# packaging box factory construction

Dataset: EcoSpold 2, unit process
Geography: RER
Time period: 1993-01-01 to 2022-12-31
Technology level: current
Classification: EcoSpold01Categories: paper & cardboard/cardboard & corrugated board
Classification: ISIC rev.4 ecoinvent: 4290:Construction of other civil engineering projects
Tags: ConvertedDataset
Scenario: Business-as-Usual
System model: Allocation at the point of substitution
Generated by: Roland Hischier
Published in: Hischier R. 2007
Database: ecoinvent
isCopyrightProtected: true

## General comment
The dataset represents a packaging production site with a annual production of 14 kt and a total life time of 50 years.
[This dataset was already contained in the ecoinvent database version 2. It was not individually updated during the transfer to ecoinvent version 3. Life Cycle Impact Assessment results may still have changed, as they are affected by changes in the supply chain, i.e. in other datasets. This dataset was generated following the ecoinvent quality guidelines for version 2. It may have been subject to central changes described in the ecoinvent version 3 change report (http://www.ecoinvent.org/database/ecoinvent-version-3/reports-of-changes/), and the results of the central updates were reviewed extensively. The changes added e.g. consistent water flows and other information throughout the database. The documentation of this dataset can be found in the ecoinvent reports of version 2, which are still available via the ecoinvent website. The change report linked above covers all central changes that were made during the conversion process.]

## Included activities end
this module includes the land-use, buildings (hall), machineries for box production as well as the dismanteling/disposal of the whole infrastructure

## Geography
Land-use from 1 Swiss packaging box producer, used here for whole Europe

## Technology
estimation of typical technology for packaging box production

## Reference product
- packaging box factory: 1 unit; By-product classification allocatable product; CPC 53269: Other constructions for manufacturing
  EcoSpold01Location=RER
  production volume 1.32237 unit
    This is a placeholder value that does not reflect real-world production volumes. This dataset does not currently require a real-world production volume to work in the database framework, and no actual data were collected yet. This has no negative effect on the results of the ecoinvent database. The placeholder value of this activity was scaled according to the nominal GDP of 2005 (source: United Nations, http://data.un.org/Glossary.aspx?q=GDP+%28current+US%24%29, accessed 20130726) to reflect an appropriate share of the global production volume, which is also a placeholder value.
  property price 3.77936e7 EUR2005
    Convert from EU 27 price to the world by currency exchange rate.
  properties: carbon allocation 0 kg, carbon content 0

## Inputs from technosphere
- building, hall, steel construction: 9600 m2; lognormal variance with pedigree 0.4921, pedigree (5,4,5,3,4)
  EcoSpold01Location=CH
  Rough estimation
  Uncertainty: rough estimation
- electronics scrap from control units: -6250 kg; lognormal variance with pedigree 0.1521, pedigree (5,4,1,3,4)
  Calculated, based on input
  EcoSpold01Location=RER
  Uncertainty: calculated, based on input
  production volume
    Calculated from the production volume of packaging box factory in proportion to the respective output amounts.
  properties: carbon content, fossil 0.337146, carbon content, non-fossil 0.00013442, dry mass 1 kg, wet mass 1 kg
- electronics, for control units: 6250 kg; lognormal variance with pedigree 0.1921, pedigree (5,4,5,3,4)
  Rough estimation
  EcoSpold01Location=RER
  Uncertainty: rough estimation
  properties: carbon content, fossil 0.337146, carbon content, non-fossil 0.00013442, dry mass 1 kg, wet mass 1 kg
  note on carbon content, fossil: The control unit has a composition of 46% steel (housing), 32% plastics, 14% printed wiring boards and 8% cables (various types).;
- polyethylene, high density, granulate: 25000 kg; lognormal variance with pedigree 0.1921, pedigree (5,4,5,3,4)
  EcoSpold01Location=RER
  Rough estimation
  Uncertainty: rough estimation
  properties: carbon content, fossil 0.857143, dry mass 1 kg, heating value, net 42.47 MJ, wet mass 1 kg
  note on carbon content, fossil: Polyethylene is formed out of a huge amount of ethylene monomers (C2H4) (ecoinvent v2.2 report 11_II). MW=28 g/mol
- steel, chromium steel 18/8, hot rolled: 438000 kg; lognormal variance with pedigree 0.1921, pedigree (5,4,5,3,4)
  EcoSpold01Location=RER
  Rough estimation
  Uncertainty: rough estimation
  properties: carbon content, fossil 0.0008, dry mass 1 kg, wet mass 1 kg
  note on carbon content, fossil: Stainless steel model is the grade 304 steel (18/8 stainless, 18% chromium 8% nickel; max. 0.08% C)
- steel, low-alloyed, hot rolled: 156000 kg; lognormal variance with pedigree 0.1921, pedigree (5,4,5,3,4)
  EcoSpold01Location=RER
  Rough estimation
  Uncertainty: rough estimation
  properties: carbon content, fossil 0.005, dry mass 1 kg, wet mass 1 kg
  note on carbon content, fossil: Low alloyed steel composition given in Tab. 3.2 ecoinvent v2.2 report 10_partII. Steel assumed to have a C content of 0.5%
- waste polyethylene: -25000 kg; lognormal variance with pedigree 0.1521, pedigree (5,4,1,3,4)
  EcoSpold01Location=CH
  Calculated, based on input
  Uncertainty: calculated, based on input
  production volume
    (same comment as for electronics scrap from control units)
  properties: carbon content, fossil 0.825301, dry mass 0.996 kg, heating value, net 42.47 MJ, water content 0.00401606, wet mass 1 kg
  note on carbon content, fossil: C content in 1 kg DM was calculated using data in Tab A.1, ecoinvent v2.2 report 13_I
  note on heating value, net: Value taken from the general comment of the treatment dataset.

## Inputs from nature
- Occupation, construction site [natural resource, land]: 24000 m2*year; lognormal variance with pedigree 0.1021, pedigree (1,4,5,3,1)
  Estimated, based on data from one CH site
  Uncertainty: Estimated, based on data from one CH site
- Occupation, industrial area [natural resource, land]: 660000 m2*year; lognormal variance with pedigree 0.1021, pedigree (1,4,5,3,1)
  (same comment as for Occupation, construction site)
- Transformation, from unspecified [natural resource, land]: 13200 m2; lognormal variance with pedigree 0.1821, pedigree (1,4,5,3,1)
  (same comment as for Occupation, construction site)
- Transformation, to industrial area [natural resource, land]: 13200 m2; lognormal variance with pedigree 0.1821, pedigree (1,4,5,3,1)
  (same comment as for Occupation, construction site)

## Sampling procedure
literature and estimations from similar processes

## Extrapolations
Land-use data are based on one production site. Other information is rough estimation.

## Review by Hans-Jörg Althaus 2003-08-26
passed
