# treatment of sewage sludge, 97% water, WWT, WW from medium density board production, landfarming

Dataset: EcoSpold 2, unit process
Geography: RoW
Time period: 2000-01-01 to 2022-12-31
Technology level: current
Classification: ISIC rev.4 ecoinvent: 3821:Treatment and disposal of non-hazardous waste
Scenario: Business-as-Usual
System model: Allocation at the point of substitution
Generated by: Nikolia Stoikou
Database: ecoinvent
isCopyrightProtected: true

## General comment
The process represents the treatment of a waste (sewage sludge) that is exclusively produced from another waste treatment. Recommended use of this dataset: to be used within the specific chain of treatments for 'wastewater from medium density board production'. Share of biogenic carbon in the sludge: 98.78%.

## Included activities start
The activity starts with the waste being available for landfarming. Collection and transportation of the waste to this process is not included.

## Included activities end
The activity ends with the waste being treated and waste-specific emissions from the landfarming process are released to the environment (air, water and soil). The activity is considering local fate of emissions and the initial specific wastewater composition (generating the sewage sludge). Further, it includes provision of fertiliser functions for N, P, K, if present in the sludge.

## Geography
The site has mean annual temperature (MAT) of 16.743579766537 degC, mean annual precipitation (MAP) of 1250.84108527132 mm/year, mean annual actual evaporation (EAT) of 460.58904958214 mm/year. Climate will influence the local fate emissions based on the elemental composition of the sludge as well as water evaporation to air (= consumptive water use).
References: UN data, 2020. Precipitation, Environment Statistics Database, United Nations Statistics Division Available at: http://data.un.org/Data.aspx?q=precipitation&d=ENV&f=variableID%3a6;
World Bank, 2022. Surface area (sq.km), World Bank Group Available at: https://data.worldbank.org/indicator/AG.SRF.TOTL.K2;
Doka G.,2021. A model for composition-specific life cycle inventories of regionalised wastewater fates, Zurich, Switzerland. http://www.doka.ch/publications.htm

## Technology
Landfarming is the process of spreading a substrate on agricultural soil. Sewage sludge is generated in the wastewater treatment of wastewater from medium density board production. Spreading of liquid sewage sludge (97w% water content) on agricultural fields with mobile vacuum tanker.

## Reference product
- organic phosphorus fertiliser, as P2O5: 1 kg; By-product classification allocatable product; CPC 34659: Fertilizers n.e.c.; lognormal variance with pedigree 0.21728, pedigree (1,1,1,1,1)
  gross fertilizer function provided from sewage sludge spreading on agricultural fields.
  Uncertainty: Uncertainty calculated from upstream wastewater technosphere fate uncertainty, wastewater composition uncertainty, and treatment model uncertainty
  production volume 166.521 kg
    Calculated in proportion to wastewater reference product.
  property oxygen content 0.563579
    Oxygen content (on a dry matter basis) of organic phosphorus fertiliser, as P2O5 is calculated from the molecular formula of the substance (Phosphorus).
  property phosphorus content 0.436421
    Phosphorus content (on a dry matter basis) of organic phosphorus fertiliser, as P2O5 is calculated from the molecular formula of the substance (Phosphorus).
  property price 0.241 EUR2005
    Set equal to the price of the corresponding inorganic fertiliser
  properties: carbon allocation 0 kg, carbon content 0, carbon content, fossil 0, carbon content, non-fossil 0, dry mass 1 kg, water content 0, water in wet mass 0 kg, wet mass 1 kg

## Inputs from technosphere
- aluminium sulfate, powder: 2.16889e-5 kg
- biowaste: -0.000858997 kg
- chemical, organic: 0.000851386 kg
- diesel, burned in building machine: 0.0338652 MJ
- dust collector, electrostatic precipitator, for industrial use: 5.3003e-9 unit
- electricity, medium voltage: 0.0479076, 0.0149487, 0.000445172, 0.00227145, 0.137156, 0.00750221 kWh (6 suppliers, which the file names only by identifier); sum of these 0.210231 kWh
- furnace, wood chips, softwood storage area, 1000kW: 2.64862e-8 unit
- furnace, wood chips, with silo, 5000kW: 1.1194e-7 unit
- hazardous waste, for incineration: -0.000755484 kg
- heat, district or industrial, natural gas: 1.02103 MJ
- heat, district or industrial, other than natural gas: 0.0240988, 0.0146767 MJ (2 suppliers, which the file names only by identifier); sum of these 0.0387756 MJ
- lubricating oil: 0.000124711 kg
- melamine formaldehyde resin: 0.0399533 kg
- paraffin: 0.00448999 kg
- pulpwood, hardwood, measured as solid wood under bark: 7.08463e-6 m3
- pulpwood, softwood, measured as solid wood under bark: 0.000593914 m3
- sawdust, wet, measured as dry mass: 0.000570837, 0.0279863 kg (2 suppliers, which the file names only by identifier); sum of these 0.0285571 kg
- slab and siding, softwood, wet, measured as dry mass: 0.00198929, 0.00771366 kg (2 suppliers, which the file names only by identifier); sum of these 0.00970295 kg
- tap water: 0.000511555, 0.0213184, 0.00084543, 0.00157753, 0.243957, 0.000554593, 0.00424975 kg (7 suppliers, which the file names only by identifier); sum of these 0.273014 kg
- urea: 0.000337348, 4.26651e-5, 0.000288071 kg (3 suppliers, which the file names only by identifier); sum of these 0.000668085 kg
- urea formaldehyde resin: 0.0443292 kg
- wastewater from medium density board production: -0.000387167 m3
- wood ash mixture, pure: -0.00190733 kg
- wood chips, dry, measured as dry mass: 0.349601 kg
- wood chips, from post-consumer wood, measured as dry mass: 0.105591 kg
- wood chips, wet, measured as dry mass: 1.24513e-6, 0.00054954 kg (2 suppliers, which the file names only by identifier); sum of these 0.000550785 kg
- wooden board factory, organic bonded boards: 3.62388e-11 unit

## Inputs from nature
- Water, cooling, unspecified natural origin [natural resource, in water]: 0.000273014 m3
- Water, river [natural resource, in water]: 0.00030726 m3
- Water, well, in ground [natural resource, in water]: 2.67307e-7 m3

## Emissions to nature
- Acetaldehyde [air, urban air close to ground]: 5.71664e-7 kg
- Ammonia [air, urban air close to ground]: 6.9321e-6 kg
- Arsenic ion [air, urban air close to ground]: 4.007e-9 kg
- Benzene [air, urban air close to ground]: 3.64637e-6 kg
- Benzene, ethyl- [air, urban air close to ground]: 1.2021e-7 kg
- Benzene, hexachloro- [air, urban air close to ground]: 2.88504e-14 kg
- Benzo(a)pyrene [air, urban air close to ground]: 2.0035e-9 kg
- Bromine [air, urban air close to ground]: 2.4042e-7 kg
- Cadmium II [air, urban air close to ground]: 2.8049e-9 kg
- Calcium [air, urban air close to ground]: 2.34409e-5 kg
- Carbon dioxide, non-fossil [air, urban air close to ground]: 0.408714 kg
- Carbon monoxide, non-fossil [air, urban air close to ground]: 0.000801399 kg
- Chlorine [air, urban air close to ground]: 7.21259e-7 kg
- Chromium III [air, urban air close to ground]: 1.58677e-8 kg
- Chromium VI [air, urban air close to ground]: 1.6028e-10 kg
- Copper ion [air, urban air close to ground]: 8.81539e-8 kg
- Dinitrogen monoxide [air, urban air close to ground]: 9.21609e-6 kg
- Dioxins, measured as 2,3,7,8-tetrachlorodibenzo-p-dioxin [air, urban air close to ground]: 1.2021e-13 kg
- Fluorine [air, urban air close to ground]: 2.0035e-7 kg
- Formaldehyde [air, urban air close to ground]: 0.000131796 kg
- Hydrocarbons, aliphatic, alkanes, unspecified [air, urban air close to ground]: 3.64637e-6 kg
- Hydrocarbons, aliphatic, unsaturated [air, urban air close to ground]: 1.24217e-5 kg
- Lead II [air, urban air close to ground]: 1.00175e-7 kg
- Magnesium [air, urban air close to ground]: 1.44252e-6 kg
- Manganese II [air, urban air close to ground]: 6.81189e-7 kg
- Mercury II [air, urban air close to ground]: 1.2021e-9 kg
- Methane, non-fossil [air, urban air close to ground]: 6.01049e-6 kg
- Methanol [air, non-urban air or from high stacks]: 1.71229e-5 kg
- NMVOC, non-methane volatile organic compounds [air, urban air close to ground]: 0.000376131 kg
- Nickel II [air, urban air close to ground]: 2.4042e-8 kg
- Nitrogen oxides [air, urban air close to ground]: 0.000480839 kg
- PAH, polycyclic aromatic hydrocarbons [air, urban air close to ground]: 4.44776e-8 kg
- Particulate Matter, < 2.5 um [air, urban air close to ground]: 1.00175e-5 kg
- Particulate Matter, > 10 um [air, unspecified]: 7.62918e-5 kg
- Phenol, pentachloro- [air, urban air close to ground]: 3.24567e-11 kg
- Phosphorus [air, urban air close to ground]: 1.2021e-6 kg
- Potassium I [air, urban air close to ground]: 9.37637e-5 kg
- Sodium [air, urban air close to ground]: 5.20909e-6 kg
- Sulfur dioxide [air, urban air close to ground]: 1.00175e-5 kg
- Toluene [air, urban air close to ground]: 1.2021e-6 kg
- Zinc II [air, urban air close to ground]: 1.2021e-6 kg
- m-Xylene [air, urban air close to ground]: 4.80839e-7 kg
