# treatment of aluminium scrap, new, at remelter

Dataset: EcoSpold 2, unit process
Geography: RoW
Time period: 2005-01-01 to 2022-12-31
Technology level: current
Classification: ISIC rev.4 ecoinvent: 2420:Manufacture of basic precious and other non-ferrous metals
Classification: EcoSpold01Categories: metals/extraction
Scenario: Business-as-Usual
System model: Allocation at the point of substitution
Share of production covered: 17.4 %
Generated by: Pascal Lesage
Published in: European Aluminium Association 2008
Database: ecoinvent
isCopyrightProtected: true

## General comment
This dataset is based on two sources: the European Aluminium Association 2005 LCI data (EAA, 2008); and (2) the ecoinvent v2.2 dataset for the same activity (Althaus, 2009), itself largely based on EAA data from 2000. Priority was given to data contained in EAA (2008); Althaus (2009) was used only in cases where it was found to be more complete that EAA (2008). Note that both sources are European in scope - this GLO dataset is therefore an extrapolation.
Remelters use mainly reverbatory furnaces, and this dataset is based on this furnace technology only.
The dataset excludes, for lack of access to data, salt slag and dross recycling. According to EAA, this data gap represents approximately 10-20% of potential impacts, as calculated using the CML 2001 method.
The following emissions to air are reported in EAA 2008 but excluded from this dataset: CO (0.095 kg/tonne secondary aluminium), Dust/particulates (0.041 kg/tonne secondary aluminium), NOx (0.329 kg/tonne secondary aluminium), SO2 (0.051 kg/tonne secondary aluminium), and VOC (0.050 kg/tonne secondary aluminium). These are assumed to be combustion emissions or electricity production emissions, conclusion arrived at by comparing gate-to-gate emissions with the cradle-to-gate emissions also reported in EAA 2008. Their inclusion wouldhave led to double-counting.

## Included activities start
The activity starts with the reception of new scrap (also called process scrap), i.e. surplus material arising during the production and fabrication of aluminium products up to the point where they are sold to the final consumer. These include extrusion discards, sheet edge trim, turnings, millings and dross.
New scrap does not require a scrap preparation activity.

## Included activities end
The activity ends with wrought aluminium billets. Note that the dataset excludes salt slag processing and dross recycling (data gap), as well as an output of unspecified metal for recycling output.

## Geography
Some Swiss datasets are used for European processes.

## Technology
Average technology for the aluminium recycled in Europe

## Reference product
- aluminium, wrought alloy: 1 kg; name secondaryAluminiumOutput; source European Aluminium Association 2008; By-product classification allocatable product; CPC 4153: Semi-finished products of aluminium or aluminium alloys; lognormal variance with pedigree 0.0032, pedigree (1,3,1,5,1)
  production volume 1.53475e10 kg
    Based on International Aluminium Institute data on the relative share of primary, secondary (new scrap) and aluminium (old scrap) aluminium in wrought alloy, the total amount of wrought alloy produced globally, and the total amount of primary aluminium ingots produced globally.
  property price 1.44 EUR2005
    Estimated based on literature values and expert judgement. Aluminium ccast alloys are about 90% of the price of aluminium wrought alloys.
  properties: carbon allocation 0 kg, carbon content 0, carbon content, fossil 0, carbon content, non-fossil 0, dry mass 1 kg, water content 0, water in wet mass 0 kg, wet mass 1 kg

## Inputs from technosphere
- acrylonitrile-butadiene-styrene copolymer: 1.73813e-5 kg
- activated carbon, granular: 1.09077e-5 kg
- alkyd paint, white, without solvent, in 60% solution state: 7.34624e-8, 3.48735e-7 kg (2 suppliers, which the file names only by identifier); sum of these 4.22198e-7 kg
- aluminium casting facility: 5.34475e-14 unit
- aluminium oxide, non-metallurgical: 0.000216499, 0.00129388 kg (2 suppliers, which the file names only by identifier); sum of these 0.00151038 kg
- aluminium scrap, new: -0.00804977, -0.00804391 kg (2 suppliers, which the file names only by identifier); sum of these -0.0160937 kg
- aluminium, cast alloy: 0.0785484 kg
- aluminium, primary, ingot: 0.000355458, 6.45427e-5, 1.29053e-5 kg (3 suppliers, which the file names only by identifier); sum of these 0.000432906 kg
- aluminium, wrought alloy: 1.58618e-5 kg
- ammonia, anhydrous, liquid: 1.46161e-6, 1.53193e-7, 3.23472e-6, 2.88732e-7, 5.6301e-6, 7.5294e-7, 6.84827e-7, 1.6201e-5, 4.83975e-7 kg (9 suppliers, which the file names only by identifier); sum of these 2.88911e-5 kg
- ammonium chloride: 3.75702e-7 kg
- cast iron: 8.10641e-6 kg
- cement, Portland: 4.37961e-5 kg
- chemical, inorganic: 6.51053e-8 kg
- chromium: 1.62983e-7 kg
- clay: 8.67217e-9, 5.70677e-5 kg (2 suppliers, which the file names only by identifier); sum of these 5.70764e-5 kg
- coating powder: 3.05575e-5, 1.5091e-5 kg (2 suppliers, which the file names only by identifier); sum of these 4.56485e-5 kg
- copper cake: -5.44911e-6 kg
- copper scrap, sorted, pressed: -1.36049e-7 kg
- copper sulfate: 1.21111e-7 kg
- copper, cathode: 0.000952419 kg
- diesel, burned in building machine: 2.7066e-5 MJ
- diesel, burned in diesel-electric generating set, 10MW: 0.00027075 MJ
- electricity, high voltage: 0.00279088 kWh
- electricity, medium voltage: 0.263856, 0.00595836, 0.0168953, 0.00104066, 0.0132513, 0.00017744, 0.00090537, 0.00141398, 0.0546684, 0.00405247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 kWh (11 suppliers, which the file names only by identifier); sum of these 0.365209 kWh
- epoxy resin, liquid: 3.77057e-5, 7.94284e-6 kg (2 suppliers, which the file names only by identifier); sum of these 4.56485e-5 kg
- ethoxylated alcohol (AE7): 2.90689e-6, 1.3968e-5 kg (2 suppliers, which the file names only by identifier); sum of these 1.68749e-5 kg
- ethylene: 8.12846e-7, 4.30455e-7, 1.30419e-8 kg (3 suppliers, which the file names only by identifier); sum of these 1.25634e-6 kg
- ethylene glycol: 0.0032322 kg
- fibre, viscose: 6.84883e-5 kg
- flat glass, uncoated: 2.1265e-5, 0.000103265 kg (2 suppliers, which the file names only by identifier); sum of these 0.00012453 kg
- fly ash and scrubber sludge: -1.17593e-6, -0.000100757, -3.9188e-5 kg (3 suppliers, which the file names only by identifier); sum of these -0.000141121 kg
- foaming agent: 1.74675e-8 kg
- glass fibre reinforced plastic, polyamide, injection moulded: 1.20846e-5 kg
- glass fibre reinforced plastic, polyester resin, hand lay-up: 1.65924e-6 kg
- hazardous waste, for incineration: -0.000416052, -0.000197106, -5.15224e-6 kg (3 suppliers, which the file names only by identifier); sum of these -0.00061831 kg
- hazardous waste, for underground deposit: -0.000106992, -6.65624e-6 kg (2 suppliers, which the file names only by identifier); sum of these -0.000113648 kg
- heat, central or small-scale, other than natural gas: 7.3428e-8 MJ
- heat, district or industrial, natural gas: 8.82211e-6, 0.163062, 0.273781, 2.38685e-5, 0.00087168 MJ (5 suppliers, which the file names only by identifier); sum of these 0.437747 MJ
- heat, district or industrial, other than natural gas: 0.000136404, 0.00777039, 4.76568e-6 MJ (3 suppliers, which the file names only by identifier); sum of these 0.00791156 MJ
- hot rolling, steel: 3.85234e-6 kg
- hydrogen peroxide, without water, in 50% solution state: 3.28022e-9 kg
- hydrogen, liquid: 2.74188e-6 kg
- inert waste: -1.54142e-6, -1.32758e-8, -6.57132e-6 kg (3 suppliers, which the file names only by identifier); sum of these -8.12602e-6 kg
- inert waste, for final disposal: -4.14811e-5, -0.00643639 kg (2 suppliers, which the file names only by identifier); sum of these -0.00647787 kg
- injection moulding: 0.00611054 kg
- isopropanol: 0.000353022, 7.34675e-5 kg (2 suppliers, which the file names only by identifier); sum of these 0.000426489 kg
- kaolin: 0.00133939 kg
- lead: 0.00601356 kg
- light emitting diode: 4.15099e-7 kg
- lubricating oil: 0.00260295, 0.000547538 kg (2 suppliers, which the file names only by identifier); sum of these 0.00315049 kg
- magnesium: 2.64774e-6 kg
- manganese dioxide: 1.54631e-6 kg
- methyl ethyl ketone: 8.40776e-7, 3.12918e-7 kg (2 suppliers, which the file names only by identifier); sum of these 1.15369e-6 kg
- municipal solid waste: -2.10436e-6 kg
- nickel, class 1: 9.50757e-8 kg
- nitric acid, without water, in 50% solution state: 1.95014e-6, 2.53699e-5, 2.89761e-6, 7.20582e-6, 9.37095e-6, 3.45265e-6, 1.18749e-5, 3.13061e-6, 2.88689e-6, 6.87847e-7 kg (10 suppliers, which the file names only by identifier); sum of these 6.88273e-5 kg
- nitrogen, liquid: 0.00289018, 0.000783259 kg (2 suppliers, which the file names only by identifier); sum of these 0.00367344 kg
- nylon 6: 7.75678e-6, 3.83075e-6 kg (2 suppliers, which the file names only by identifier); sum of these 1.15875e-5 kg
- oxygen, liquid: 7.10428e-6 kg
- palladium: 1.38523e-7 kg
- perlite: 5.37921e-8 kg
- platinum: 7.3879e-7 kg
- polyethylene terephthalate, granulate, amorphous: 8.49792e-5 kg
- polyethylene, high density, granulate: 0.00712716 kg
- polyethylene, low density, granulate: 5.79376e-5 kg
- polyphenylene sulfide: 0.0126979 kg
- polypropylene, granulate: 0.000204473 kg
- polyurethane, flexible foam: 9.02616e-5, 1.84873e-5 kg (2 suppliers, which the file names only by identifier); sum of these 0.000108749 kg
- polyvinylchloride, bulk polymerised: 5.4293e-7 kg
- polyvinylchloride, suspension polymerised: 3.88964e-5 kg
- potassium hydroxide: 2.66204e-8 kg
- potassium permanganate: 2.69827e-8 kg
- precious metal refinery: 4.53517e-14 unit
- printed wiring board, mounted mainboard, desktop computer, Pb free: 7.88813e-6 kg
- propane, burned in building machine: 0.000589057 MJ
- propylene glycol, liquid: 8.41694e-6, 4.09502e-6 kg (2 suppliers, which the file names only by identifier); sum of these 1.2512e-5 kg
- pyridine: 1.55348e-7 kg
- quicklime, milled, loose: 2.81119e-5 kg
- reinforcing steel: 0.0219458 kg
- retention aid, for paper production: 4.08624e-7 kg
- road vehicle factory: 3.58938e-11 unit
- rolling mill: 1.16473e-11 unit
- sawnwood, softwood, raw, dried (u=20%): 1.65793e-8, 4.98885e-8 m3 (2 suppliers, which the file names only by identifier); sum of these 6.64679e-8 m3
- scrap copper: -2.71824e-8, -5.79363e-7, -1.2199e-6 kg (3 suppliers, which the file names only by identifier); sum of these -1.82645e-6 kg
- scrap steel: -9.97115e-9, -2.44553e-5, -7.87011e-6 kg (3 suppliers, which the file names only by identifier); sum of these -3.23354e-5 kg
- section bar extrusion, aluminium: 7.25354e-8 kg
- section bar rolling, steel: 2.6584e-5 kg
- sheet rolling, aluminium: 1.84517e-5 kg
- sheet rolling, chromium steel: 1.81394e-5 kg
- sheet rolling, steel: 0.00217047 kg
- silica sand: 0.00173934 kg
- silicon carbide: 4.38854e-5 kg
- silver: 6.88907e-9 kg
- soap: 4.42529e-6 kg
- soda ash, dense: 2.34157e-5 kg
- sodium dithionite, anhydrous: 6.1422e-7 kg
- sodium hydroxide, without water, in 50% solution state: 3.39076e-7, 8.09363e-5 kg (2 suppliers, which the file names only by identifier); sum of these 8.12754e-5 kg
- sodium nitrite: 3.36971e-7, 1.63507e-7 kg (2 suppliers, which the file names only by identifier); sum of these 5.00478e-7 kg
- sodium silicate, without water, in 37% solution state: 1.50577e-8 kg
- sodium sulfate, anhydrite: 2.10831e-7, 2.89514e-8 kg (2 suppliers, which the file names only by identifier); sum of these 2.39783e-7 kg
- sodium sulfide: 2.1426e-7 kg
- spent solvent mixture: -0.000726446, -6.55745e-6, -0.000279893 kg (3 suppliers, which the file names only by identifier); sum of these -0.0010129 kg
- steel, chromium steel 18/8, hot rolled: 9.85026e-5 kg
- steel, low-alloyed: 8.83846e-9 kg
- steel, low-alloyed, hot rolled: 0.0504844 kg
- steel, unalloyed: 0.000470334 kg
- strontium carbonate: 6.86517e-7 kg
- sulfuric acid: 0.000413547, 5.40929e-5 kg (2 suppliers, which the file names only by identifier); sum of these 0.00046764 kg
- synthetic rubber: 0.00156416 kg
- tap water: 0.00684823, 0.397173, 0.0318074, 0.0012614, 0.271799, 0.0023537, 0.363988, 0.000827462, 0.0063407 kg (9 suppliers, which the file names only by identifier); sum of these 1.0824 kg
- tempering, flat glass: 0.00012453 kg
- tetraethyl orthosilicate: 0.00110869 kg
- tin: 6.25495e-10 kg
- titanium dioxide: 1.19542e-5, 2.42703e-5 kg (2 suppliers, which the file names only by identifier); sum of these 3.62245e-5 kg
- transport, passenger car, large size, petrol, EURO 3: 5.68214e-7 km
- urea: 2.4974e-8 kg
- used glider, electric scooter: -8.11919e-5 kg
- used glider, passenger car: -0.00311169 kg
- used internal combustion engine, passenger car: -0.126979 kg
- waste emulsion paint, separated: -6.99209e-7 kg
- waste glass: -2.42219e-8, -5.80198e-8, -6.29502e-7, -5.41317e-9, -1.19576e-6, -8.22019e-9, -5.93366e-6, -1.31627e-9 kg (8 suppliers, which the file names only by identifier); sum of these -7.85611e-6 kg
- waste mineral oil: -7.37308e-6, -0.000790808, -3.85501e-8, -0.00029783 kg (4 suppliers, which the file names only by identifier); sum of these -0.00109605 kg
- waste paint on metal: -4.2643e-6, -3.5832e-8 kg (2 suppliers, which the file names only by identifier); sum of these -4.30013e-6 kg
- waste paper, unsorted: -5.44194e-8 kg
- waste plastic, industrial electronics: -2.40812e-7, -1.594e-5 kg (2 suppliers, which the file names only by identifier); sum of these -1.61808e-5 kg
- waste plastic, mixture: -0.000200482, -1.01308e-6, -2.23519e-6, -0.000173755, -0.00140349, -1.33955e-5, -5.25391e-6, -5.5328e-6 kg (8 suppliers, which the file names only by identifier); sum of these -0.00180516 kg
- waste polyethylene: -8.62794e-8, -2.26107e-9, -6.04003e-7, -5.76486e-9, -4.35987e-10, -2.38109e-9, -9.61934e-10, -7.47769e-8 kg (8 suppliers, which the file names only by identifier); sum of these -7.76865e-7 kg
- waste polypropylene: -3.09802e-11, -2.40827e-9, -1.40414e-11, -1.94526e-8, -7.66857e-11, -1.85664e-10, -7.28203e-11, -2.77872e-9 kg (8 suppliers, which the file names only by identifier); sum of these -2.50198e-8 kg
- waste polyvinylchloride: -3.04699e-10, -1.5802e-9, -6.7227e-10, -1.66408e-9, -4.0289e-9, -6.02983e-8, -5.22595e-8, -4.22122e-7 kg (8 suppliers, which the file names only by identifier); sum of these -5.4293e-7 kg
- waste wood, untreated: -2.60745e-8 kg
- waste x-ray film: -7.91854e-5 kg
- wastewater, average: -2.93572e-6, -6.1405e-6, -0.000488518, -0.000116815 m3 (4 suppliers, which the file names only by identifier); sum of these -0.000614408 m3
- water, deionised: 9.49355e-8, 2.63728e-5, 8.67558e-5 kg (3 suppliers, which the file names only by identifier); sum of these 0.000113224 kg
- wax, lost-wax casting: 0.000602359 kg
- wire drawing, copper: 0.000939106 kg
- zinc: 5.6961e-6 kg
- zinc concentrate: 0.0011914 kg
- zircon: 0.000374168 kg

## Inputs from nature
- Occupation, inland waterbody, unspecified [natural resource, land]: 2.38096e-6 m2*year
- Transformation, from unspecified [natural resource, land]: 2.38096e-8 m2
- Transformation, to inland waterbody, unspecified [natural resource, land]: 2.38096e-8 m2
- Water, river [natural resource, in water]: 0.000127445 m3

## Emissions to nature
- Arsenic ion [air, non-urban air or from high stacks]: 5.41984e-11 kg
- Cadmium II [air, non-urban air or from high stacks]: 2.76399e-10 kg
- Carbon dioxide, fossil [air, non-urban air or from high stacks]: 9.06991e-6 kg
- Carbon monoxide, fossil [air, non-urban air or from high stacks]: 3.51205e-8 kg
- Copper ion [air, non-urban air or from high stacks]: 4.60307e-10 kg
- Dioxins, measured as 2,3,7,8-tetrachlorodibenzo-p-dioxin [air, non-urban air or from high stacks]: 3.85501e-18 kg
- Lead II [air, non-urban air or from high stacks]: 4.17347e-10 kg
- Mercury II [air, non-urban air or from high stacks]: 5.26568e-11 kg
- NMVOC, non-methane volatile organic compounds [air, unspecified]: 0.000592062 kg
- Nitrogen [air, unspecified]: 0.00367344 kg
- Nitrogen oxides [air, non-urban air or from high stacks]: 9.52997e-8 kg
- Particulate Matter, < 2.5 um [air, non-urban air or from high stacks]: 1.27086e-7 kg
- Particulate Matter, > 10 um [air, non-urban air or from high stacks]: 1.8582e-8 kg
- Particulate Matter, > 2.5 um and < 10um [air, non-urban air or from high stacks]: 1.94364e-8 kg
- Propanol [air, urban air close to ground]: 0.000269195 kg
- Sulfur dioxide [air, non-urban air or from high stacks]: 1.21052e-5 kg
- Sulfuric acid [air, non-urban air or from high stacks]: 1.238e-7 kg
- Water [air, unspecified]: 6.13602e-5 m3
- Water [air, urban air close to ground]: 7.08181e-5 m3
- Zinc II [air, non-urban air or from high stacks]: 4.98008e-8 kg
- Arsenic ion [water, surface water]: 1.87552e-11 kg
- BOD5, Biological Oxygen Demand [water, surface water]: 1.87543e-7 kg
- BOD5, Biological Oxygen Demand [water, unspecified]: 3.20523e-6 kg
- COD, Chemical Oxygen Demand [water, surface water]: 2.91776e-7 kg
- COD, Chemical Oxygen Demand [water, unspecified]: 2.37928e-5 kg
- Cadmium II [water, surface water]: 8.26329e-11 kg
- Copper ion [water, surface water]: 4.1657e-10 kg
- DOC, Dissolved Organic Carbon [water, surface water]: 1.13819e-7 kg
- DOC, Dissolved Organic Carbon [water, unspecified]: 8.81209e-6 kg
- Fluoride [water, surface water]: 1.78052e-8 kg
- Lead II [water, surface water]: 3.4057e-10 kg
- Mercury II [water, surface water]: 3.84007e-12 kg
- Phosphate [water, surface water]: 6.79109e-11 kg
- Phosphate [water, unspecified]: 1.23278e-7 kg
- Selenium IV [water, surface water]: 8.71141e-10 kg
- TOC, Total Organic Carbon [water, surface water]: 1.13819e-7 kg
- TOC, Total Organic Carbon [water, unspecified]: 8.81209e-6 kg
- Water [water, surface water]: 0.000125661 m3
- Water [water, unspecified]: 0.000337597 m3
- Zinc II [water, surface water]: 5.83031e-9 kg

## Sampling procedure
Literature / Survey

## Extrapolations
see Geography This dataset has been copied from an original dataset covering the geography RER. The uncertainty has been adjusted accordingly. The percent representativeness is based on the total volume of remelters who supplied data for EAA (2008) divided by the global volume of refining in 2007 according to Wellmet (see production volume comment for more information) and hence represents an estimate only.

## Review by Hans-Jörg Althaus 2012-06-01
ok
