# electric arc furnace secondary metallurgy slag to market for electric arc furnace secondary metallurgy slag for recovery

Dataset: EcoSpold 2, unit process
Geography: RoW
Time period: 2020-01-01 to 2025-12-31
Technology level: current
Classification: ISIC rev.4 ecoinvent: 3821:Treatment and disposal of non-hazardous waste
Scenario: Business-as-Usual
System model: Allocation at the point of substitution
Generated by: Avraam Symeonidis
Database: ecoinvent
isCopyrightProtected: true

## General comment
This is a renaming activity. Its purpose is to link 'electric arc furnace secondary metallurgy slag' to the 'market for electric arc furnace secondary metallurgy slag, for recovery'. This represents the share of electric arc furnace secondary metallurgy slag that is recovered for use via internal (in iron and steelmaking) or external routes (e.g. cement making).Through this renaming, the by-product classification of the electric arc furnace secondary metallurgy slag is changed from 'waste' to 'recyclable material'.

## Included activities start
Activity starts with the reception of 'electric arc furnace secondary metallurgy slag'.

## Included activities end
Activity ends with the 'electric arc furnace secondary metallurgy slag, for recovery' being ready for transportation.

## Reference product
- electric arc furnace secondary metallurgy slag, for recovery: 1 kg; name BP; By-product classification Recyclable; CPC 39310: Slag, dross, scalings and other waste from the manufacture of iron or steel
  production volume 6.48879e9 kg
    Assuming that 16.3% of basic oxygen furnace sludge produced through iron and steelmaking is recovered for recycling either in other iron and steemaking operations or or externally, e.g. cement making (worldsteel, 2010).
    References:
    Worldsteel (2010). Steel industry by-products. World Steel Association: Brussels, Belgium.
  property aluminium content 0.0530427
    The value of 'aluminium content' is documented in Turner & Symeonidis, 2020.
    Reference: Turner David & Symeonidis Avraam, 2020, Life cycle inventories of the treatment of iron and steelmaking by-products, ecoinvent association, Zürich, Switzerland
  property arsenic content 1.1591e-6
    The value of 'arsenic content' is documented in Turner & Symeonidis, 2020.
    Reference: Turner David & Symeonidis Avraam, 2020, Life cycle inventories of the treatment of iron and steelmaking by-products, ecoinvent association, Zürich, Switzerland
  property barium content 8.16088e-5
    The value of 'barium content' is documented in Turner & Symeonidis, 2020.
    Reference: Turner David & Symeonidis Avraam, 2020, Life cycle inventories of the treatment of iron and steelmaking by-products, ecoinvent association, Zürich, Switzerland
  property calcium content 0.312637
    The value of 'calcium content' is documented in Turner & Symeonidis, 2020.
    Reference: Turner David & Symeonidis Avraam, 2020, Life cycle inventories of the treatment of iron and steelmaking by-products, ecoinvent association, Zürich, Switzerland
  property carbon content, fossil 0.000830968
    The value of 'carbon content, fossil' is documented in Turner & Symeonidis, 2020.
    Reference: Turner David & Symeonidis Avraam, 2020, Life cycle inventories of the treatment of iron and steelmaking by-products, ecoinvent association, Zürich, Switzerland
  property carbon content, non-fossil 0
    The value of 'carbon content, non-fossil' is documented in Turner & Symeonidis, 2020.
    Reference: Turner David & Symeonidis Avraam, 2020, Life cycle inventories of the treatment of iron and steelmaking by-products, ecoinvent association, Zürich, Switzerland
  property chromium content 0.000889377
    The value of 'chromium content' is documented in Turner & Symeonidis, 2020.
    Reference: Turner David & Symeonidis Avraam, 2020, Life cycle inventories of the treatment of iron and steelmaking by-products, ecoinvent association, Zürich, Switzerland
  property copper content 0.000110177
    The value of 'copper content' is documented in Turner & Symeonidis, 2020.
    Reference: Turner David & Symeonidis Avraam, 2020, Life cycle inventories of the treatment of iron and steelmaking by-products, ecoinvent association, Zürich, Switzerland
  property fluorine content 0.0129487
    The value of 'fluorine content' is documented in Turner & Symeonidis, 2020.
    Reference: Turner David & Symeonidis Avraam, 2020, Life cycle inventories of the treatment of iron and steelmaking by-products, ecoinvent association, Zürich, Switzerland
  property heating value, net 0 MJ
    Non combustible products are assumed to have an LHV equal to zero (0).
  property iron content 0.0199153
    The value of 'iron content' is documented in Turner & Symeonidis, 2020.
    Reference: Turner David & Symeonidis Avraam, 2020, Life cycle inventories of the treatment of iron and steelmaking by-products, ecoinvent association, Zürich, Switzerland
  property lead content 3.62172e-5
    The value of 'lead content' is documented in Turner & Symeonidis, 2020.
    Reference: Turner David & Symeonidis Avraam, 2020, Life cycle inventories of the treatment of iron and steelmaking by-products, ecoinvent association, Zürich, Switzerland
  property magnesium content 0.0427775
    The value of 'magnesium content' is documented in Turner & Symeonidis, 2020.
    Reference: Turner David & Symeonidis Avraam, 2020, Life cycle inventories of the treatment of iron and steelmaking by-products, ecoinvent association, Zürich, Switzerland
  property manganese content 0.00556519
    The value of 'manganese content' is documented in Turner & Symeonidis, 2020.
    Reference: Turner David & Symeonidis Avraam, 2020, Life cycle inventories of the treatment of iron and steelmaking by-products, ecoinvent association, Zürich, Switzerland
  property molybdenum content 7.0884e-5
    The value of 'molybdenum content' is documented in Turner & Symeonidis, 2020.
    Reference: Turner David & Symeonidis Avraam, 2020, Life cycle inventories of the treatment of iron and steelmaking by-products, ecoinvent association, Zürich, Switzerland
  property nickel content 6.01469e-5
    The value of 'nickel content' is documented in Turner & Symeonidis, 2020.
    Reference: Turner David & Symeonidis Avraam, 2020, Life cycle inventories of the treatment of iron and steelmaking by-products, ecoinvent association, Zürich, Switzerland
  property oxygen content 0.476841
    The value of 'oxygen content' is documented in Turner & Symeonidis, 2020.
    Reference: Turner David & Symeonidis Avraam, 2020, Life cycle inventories of the treatment of iron and steelmaking by-products, ecoinvent association, Zürich, Switzerland
  property phosphorus content 0.000299524
    The value of 'phosphorus content' is documented in Turner & Symeonidis, 2020.
    Reference: Turner David & Symeonidis Avraam, 2020, Life cycle inventories of the treatment of iron and steelmaking by-products, ecoinvent association, Zürich, Switzerland
  property potassium content 0.000137559
    The value of 'potassium content' is documented in Turner & Symeonidis, 2020.
    Reference: Turner David & Symeonidis Avraam, 2020, Life cycle inventories of the treatment of iron and steelmaking by-products, ecoinvent association, Zürich, Switzerland
  property price 0.000778 EUR2005
    Value is calculated based on the iron content of this material in combination with the price for iron ore concentrate on a per kg iron basis.
  property silicon content 0.0601451
    The value of 'silicon content' is documented in Turner & Symeonidis, 2020.
    Reference: Turner David & Symeonidis Avraam, 2020, Life cycle inventories of the treatment of iron and steelmaking by-products, ecoinvent association, Zürich, Switzerland
  property sodium content 0.000167606
    The value of 'sodium content' is documented in Turner & Symeonidis, 2020.
    Reference: Turner David & Symeonidis Avraam, 2020, Life cycle inventories of the treatment of iron and steelmaking by-products, ecoinvent association, Zürich, Switzerland
  property sulfur content 0.00614898
    The value of 'sulfur content' is documented in Turner & Symeonidis, 2020.
    Reference: Turner David & Symeonidis Avraam, 2020, Life cycle inventories of the treatment of iron and steelmaking by-products, ecoinvent association, Zürich, Switzerland
  property titanium content 0.00182329
    The value of 'titanium content' is documented in Turner & Symeonidis, 2020.
    Reference: Turner David & Symeonidis Avraam, 2020, Life cycle inventories of the treatment of iron and steelmaking by-products, ecoinvent association, Zürich, Switzerland
  property vanadium content 0.000373201
    The value of 'vanadium content' is documented in Turner & Symeonidis, 2020.
    Reference: Turner David & Symeonidis Avraam, 2020, Life cycle inventories of the treatment of iron and steelmaking by-products, ecoinvent association, Zürich, Switzerland
  property zinc content 0.000100723
    The value of 'zinc content' is documented in Turner & Symeonidis, 2020.
    Reference: Turner David & Symeonidis Avraam, 2020, Life cycle inventories of the treatment of iron and steelmaking by-products, ecoinvent association, Zürich, Switzerland
  properties: carbon allocation 0.000826813 kg, carbon content 0.000830968, dry mass 0.995 kg, water content 0.00502513, water in wet mass 0.005 kg, wet mass 1 kg

## Inputs from technosphere
- aluminium, cast alloy: 4.09923e-8 kg
- aluminium, primary, ingot: 1.64578e-10 kg
- aluminium, wrought alloy: 4.07574e-8 kg
- anode, for metal electrolysis: 6.02474e-6 kg
- argon, liquid: 4.13858e-5 kg
- calcium carbide, technical grade: 1.19535e-9 kg
- cast iron: 1.29931e-8 kg
- chemical, inorganic: 6.87397e-10 kg
- coke: 1.26842e-6 MJ
- diesel, burned in building machine: 6.17254e-9 MJ
- dolomite: 4.53745e-6 kg
- electric arc furnace converter: 6.65864e-14 unit
- electric arc furnace dust: -6.10701e-6, -2.45672e-5 kg (2 suppliers, which the file names only by identifier); sum of these -3.06742e-5 kg
- electric arc furnace secondary metallurgy slag: -2.91962e-5 kg
- electric arc furnace slag: -4.30684e-6, -0.000222854 kg (2 suppliers, which the file names only by identifier); sum of these -0.000227161 kg
- electricity, high voltage: 1.32217e-8, 1.79669e-7, 1.60377e-9, 9.54609e-9, 1.75355e-7, 3.82999e-8, 2.79919e-9, 4.80108e-8, 5.6071e-8, 1.0285e-9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 kWh (45 suppliers, which the file names only by identifier); sum of these 3.99487e-6 kWh
- electricity, low voltage: 4.43046e-11, 3.82891e-10, 1.20287e-11, 4.00246e-11, 5.38928e-11, 3.70658e-11, 2.04501e-10, 7.27182e-10, 2.26666e-9, 3.93511e-10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 kWh (45 suppliers, which the file names only by identifier); sum of these 6.16391e-8 kWh
- electricity, medium voltage: 3.53175e-7, 4.76876e-7, 6.85838e-7, 1.43164e-7, 8.38556e-6, 0.00018304, 4.52889e-7, 1.69592e-7, 2.14011e-6, 7.12341e-5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 kWh (47 suppliers, which the file names only by identifier); sum of these 0.000986942 kWh
- electrode, negative, Ni: 1.3846e-7 kg
- ethylene glycol: 8.38263e-12 kg
- ferrochromium, high-carbon, 68% Cr: 0.000340438 kg
- ferromanganese, high-coal, 74.5% Mn: 2.88018e-6 kg
- ferronickel: 0.000411252 kg
- ferrosilicon: 2.46912e-6 kg
- fluorspar, 97% purity: 5.8122e-9 kg
- hard coal: 1.29416e-6, 2.22342e-6, 1.00818e-6, 7.1351e-6, 1.02882e-6, 1.16086e-6, 4.37517e-7, 2.39233e-7 kg (8 suppliers, which the file names only by identifier); sum of these 1.45273e-5 kg
- heat, district or industrial, natural gas: 4.36445e-6 MJ
- heat, district or industrial, other than natural gas: 1.23062e-6 MJ
- heavy fuel oil: 4.40324e-8, 3.70513e-10, 2.4424e-9, 4.75313e-10, 6.36278e-10 kg (5 suppliers, which the file names only by identifier); sum of these 4.79569e-8 kg
- hydrochloric acid, without water, in 30% solution state: 4.66568e-9 kg
- inert waste: -2.62496e-7 kg
- inert waste, for final disposal: -1.14851e-5 kg
- iron scrap, sorted, pressed: 0.00101796 kg
- iron scrap, unsorted: 9.70143e-6 kg
- lime: 4.9912e-6 kg
- liquefied petroleum gas: 5.00468e-9, 3.49688e-10, 5.21129e-10, 1.57109e-9, 7.43934e-8 kg (5 suppliers, which the file names only by identifier); sum of these 8.184e-8 kg
- lubricating oil: 8.04485e-6 kg
- molybdenum trioxide: 3.56708e-9 kg
- natural gas, high pressure: 1.00429e-7, 4.23912e-8, 2.42786e-7, 7.20496e-8, 4.0759e-6, 4.1659e-7, 4.54742e-8, 1.34188e-9, 1.61472e-7, 1.69565e-7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 m3 (24 suppliers, which the file names only by identifier); sum of these 1.20903e-5 m3
- nickel, class 1: 8.38263e-9 kg
- nitrogen, liquid: 9.1756e-6 kg
- oxygen, liquid: 5.98066e-5 kg
- pig iron: 5.4007e-5 kg
- propane, burned in building machine: 4.86916e-9 MJ
- quicklime, in pieces, loose: 9.1628e-5 kg
- refractory, basic, packed: 2.53834e-5 kg
- silica sand: 7.96037e-9 kg
- spent solvent mixture: -8.38263e-12 kg
- sponge iron: 6.59949e-5 kg
- sulfur dioxide, liquid: 3.24825e-9 kg
- sulfuric acid: 2.54865e-9 kg
- wastewater, average: -1.06442e-5 m3

## Inputs from nature
- Water, cooling, unspecified natural origin [natural resource, in water]: 9.98299e-6 m3
- Water, unspecified natural origin [natural resource, in ground]: 1.33051e-5 m3

## Emissions to nature
- Antimony ion [air, unspecified]: 1.58514e-13 kg
- Argon-40 [air, unspecified]: 5.86861e-9 kg
- Arsenic ion [air, unspecified]: 1.79303e-13 kg
- Benzene [air, unspecified]: 7.86982e-10 kg
- Benzene, hexachloro- [air, unspecified]: 4.41334e-12 kg
- Cadmium II [air, unspecified]: 2.28426e-11 kg
- Cadmium II [air, urban air close to ground]: 4.58299e-13 kg
- Carbon dioxide, fossil [air, unspecified]: 7.57841e-5 kg
- Carbon dioxide, fossil [air, urban air close to ground]: 2.13549e-6 kg
- Carbon monoxide, fossil [air, unspecified]: 9.59048e-7 kg
- Carbon monoxide, fossil [air, urban air close to ground]: 1.55139e-8 kg
- Chromium III [air, unspecified]: 4.13994e-10 kg
- Chromium III [air, urban air close to ground]: 1.12029e-12 kg
- Chromium VI [air, unspecified]: 9.35495e-14 kg
- Cobalt II [air, unspecified]: 1.05676e-13 kg
- Copper ion [air, unspecified]: 1.38104e-10 kg
- Copper ion [air, urban air close to ground]: 1.57858e-12 kg
- Dioxins, measured as 2,3,7,8-tetrachlorodibenzo-p-dioxin [air, unspecified]: 1.21908e-15 kg
- Dioxins, measured as 2,3,7,8-tetrachlorodibenzo-p-dioxin [air, urban air close to ground]: 2.03688e-18 kg
- Hydrocarbons, aromatic [air, unspecified]: 1.24936e-7 kg
- Hydrochloric acid [air, unspecified]: 8.60386e-9 kg
- Hydrochloric acid [air, urban air close to ground]: 2.154e-11 kg
- Hydrogen fluoride [air, unspecified]: 2.83703e-10 kg
- Lead II [air, unspecified]: 8.94879e-10 kg
- Lead II [air, urban air close to ground]: 1.85866e-11 kg
- Manganese II [air, unspecified]: 2.64191e-13 kg
- Mercury II [air, unspecified]: 2.61143e-10 kg
- Mercury II [air, urban air close to ground]: 3.0044e-12 kg
- Methane, fossil [air, urban air close to ground]: 7.68816e-10 kg
- NMVOC, non-methane volatile organic compounds [air, urban air close to ground]: 7.68822e-10 kg
- Nickel II [air, unspecified]: 1.91377e-10 kg
- Nickel II [air, urban air close to ground]: 1.01844e-13 kg
- Nitrogen oxides [air, unspecified]: 1.37827e-7 kg
- Nitrogen oxides [air, urban air close to ground]: 2.75906e-9 kg
- PAH, polycyclic aromatic hydrocarbons [air, unspecified]: 1.45692e-10 kg
- PAH, polycyclic aromatic hydrocarbons [air, urban air close to ground]: 4.32838e-12 kg
- Particulate Matter, < 2.5 um [air, unspecified]: 4.0147e-8 kg
- Particulate Matter, < 2.5 um [air, urban air close to ground]: 2.68619e-10 kg
- Particulate Matter, > 10 um [air, unspecified]: 1.403e-8 kg
- Particulate Matter, > 10 um [air, urban air close to ground]: 9.48067e-11 kg
- Particulate Matter, > 2.5 um and < 10um [air, unspecified]: 4.01747e-8 kg
- Particulate Matter, > 2.5 um and < 10um [air, urban air close to ground]: 2.68619e-10 kg
- Polychlorinated biphenyls [air, unspecified]: 2.73695e-12 kg
- Polychlorinated biphenyls [air, urban air close to ground]: 2.80071e-14 kg
- Selenium IV [air, unspecified]: 1.05676e-13 kg
- Sulfur dioxide [air, unspecified]: 6.12774e-8 kg
- Sulfur dioxide [air, urban air close to ground]: 7.17492e-11 kg
- Tellurium [air, unspecified]: 2.12219e-13 kg
- Tin ion [air, unspecified]: 2.64191e-13 kg
- Titanium ion [air, unspecified]: 1.05676e-13 kg
- Vanadium V [air, unspecified]: 2.64191e-13 kg
- Water [air, unspecified]: 7.10007e-6 m3
- Water [air, urban air close to ground]: 2.72386e-8 m3
- Zinc II [air, unspecified]: 5.77487e-9 kg
- Zinc II [air, urban air close to ground]: 2.73401e-10 kg
- Cadmium II [water, unspecified]: 6.11065e-15 kg
- Chloride [water, unspecified]: 2.70663e-8 kg
- Chromium VI [water, unspecified]: 2.84909e-11 kg
- Copper ion [water, unspecified]: 3.00555e-12 kg
- Lead II [water, unspecified]: 6.11065e-13 kg
- Mercury II [water, unspecified]: 1.22213e-14 kg
- Nickel II [water, unspecified]: 1.24786e-13 kg
- Phosphorus [water, unspecified]: 7.43199e-15 kg
- Sulfate [water, unspecified]: 1.93162e-11 kg
- Water [water, unspecified]: 3.50478e-6 m3
- Zinc II [water, unspecified]: 1.00349e-11 kg
