# treatment of crust from Parkes process for lead production

Dataset: EcoSpold 2, unit process
Geography: GLO
Time period: 2000-01-01 to 2022-12-31
Technology level: current
Classification: ISIC rev.4 ecoinvent: 2420:Manufacture of basic precious and other non-ferrous metals
Classification: EcoSpold01Categories: metals/extraction
Tags: ConvertedDataset
Scenario: Business-as-Usual
System model: Allocation at the point of substitution
Generated by: Mischa Classen
Published in: Classen M. 2009
Database: ecoinvent
isCopyrightProtected: true

## General comment
Production of refined silver (99.9%) from Parkes crust from lead desilvering.
[This dataset was already contained in the ecoinvent database version 2. It was not individually updated during the transfer to ecoinvent version 3. Life Cycle Impact Assessment results may still have changed, as they are affected by changes in the supply chain, i.e. in other datasets. This dataset was generated following the ecoinvent quality guidelines for version 2. It may have been subject to central changes described in the ecoinvent version 3 change report (http://www.ecoinvent.org/database/ecoinvent-version-3/reports-of-changes/), and the results of the central updates were reviewed extensively. The changes added e.g. consistent water flows and other information throughout the database. The documentation of this dataset can be found in the ecoinvent reports of version 2, which are still available via the ecoinvent website. The change report linked above covers all central changes that were made during the conversion process.]

## Included activities end
Procesing of raw material from lead desilvering, infrastructure, electricity and process emissions to air.

## Geography
Data plant on average global context.

## Technology
Processing of Parkes desilvering crust by hot pressing, dezincing (vacuum distillation), cupellation of lead and moebius electrolysis (electrowinning)

## Reference product
- silver: 1 kg; name silver_byP; By-product classification allocatable product; CPC 41310: Silver (including silver plated with gold or platinum), unwrought or in semi-manufactured forms, or in powder […]; CAS 7440-22-4
  EcoSpold01Location=GLO
  production volume 1.701e6 kg
    Approximately 0.135 kg of silver is produced per 1,000 kg refined zinc (van Genderen et al., 2016). According to the USGS, 12,600,000,000 kg of primary zinc was produced globally in 2016 (Thomas 2018). We assume no losses during processing parkes process crusts.
    References
    Thomas, C. L. (2018). 2016 Minerals Yearbook - Zinc [Advance Release]. Available from https://www.usgs.gov/centers/nmic/zinc-statistics-and-information (accessed 02.07.2019).
    Van Genderen, E., Wildnauer, M., Santero, N. et al. Int J Life Cycle Assess (2016) 21: 1580. https://doi.org/10.1007/s11367-016-1131-8
  property price 324.357 EUR2005
    Price calculated as 5-year market average (2015-2019; USD/kg; USGS [2020]) and converted to EUR2005 (USD2019/EUR2005 exchange rate: 0.62; Official Data Foundation [2020] and Macrotrends [2020]).
    References:
    Official Data Foundation (2020). Inflation Calculator [Online]. Available from: https://www.officialdata.org/us/inflation/2005?endYear=2019&amount=1 [Accessed 28/07/2020]
    USGS (2020). Mineral Commodity Summaries 2020 [Online]. Available from: https://pubs.usgs.gov/periodicals/mcs2020/mcs2020.pdf [Accessed 28/07/2020]
    Macrotrends (2020). Euro Dollar Exchange Rate (EUR USD) - Historical Chart [Online]. Available from: https://www.macrotrends.net/2548/euro-dollar-exchange-rate-historical-chart [Accessed 28/07/2020]
  properties: carbon allocation 0 kg, carbon content 0, carbon content, fossil 0, carbon content, non-fossil 0, dry mass 1 kg, water content 0, water in wet mass 0 kg, wet mass 1 kg

## Inputs from technosphere
- crust from Parkes process for lead production: -2.05791 kg
- electricity, medium voltage: 40.3451 kWh
- heat, district or industrial, natural gas: 140.1 MJ
- heat, district or industrial, other than natural gas: 1493.99 MJ
- iron ore concentrate: 16.2423 kg
- lead concentrate: 474.016 kg
- lead smelter slag: -108.273 kg
- lime, packed: 1.43813, 56.4857, 112.938 kg (3 suppliers, which the file names only by identifier); sum of these 170.862 kg
- nitrogen, liquid: 4.14086, 1.13664 kg (2 suppliers, which the file names only by identifier); sum of these 5.27749 kg
- oxygen, liquid: 11.5566, 42.1177 kg (2 suppliers, which the file names only by identifier); sum of these 53.6743 kg
- silica sand: 160.558 kg

## Emissions to nature
- Antimony ion [air, non-urban air or from high stacks]: 0.000578133 kg
- Arsenic ion [air, non-urban air or from high stacks]: 0.00103672 kg
- Cadmium II [air, non-urban air or from high stacks]: 0.000833295 kg
- Carbon dioxide, fossil [air, unspecified]: 75.1793 kg
- Dioxins, measured as 2,3,7,8-tetrachlorodibenzo-p-dioxin [air, non-urban air or from high stacks]: 1.27747e-8 kg
- Lead II [air, non-urban air or from high stacks]: 0.0796887 kg
- Mercury II [air, non-urban air or from high stacks]: 2.12393e-5 kg
- Particulate Matter, < 2.5 um [air, non-urban air or from high stacks]: 0.0422128 kg
- Particulate Matter, > 10 um [air, non-urban air or from high stacks]: 0.0120624 kg
- Particulate Matter, > 2.5 um and < 10um [air, non-urban air or from high stacks]: 0.0301509 kg
- Sulfur dioxide [air, non-urban air or from high stacks]: 8.43617 kg
- Arsenic ion [water, surface water]: 0.000255494 kg
- BOD5, Biological Oxygen Demand [water, surface water]: 0.099303 kg
- COD, Chemical Oxygen Demand [water, surface water]: 0.148953 kg
- Cadmium II [water, surface water]: 0.000664286 kg
- Copper ion [water, surface water]: 0.00127747 kg
- DOC, Dissolved Organic Carbon [water, surface water]: 0.0582425 kg
- Lead II [water, surface water]: 0.0045989 kg
- Mercury II [water, surface water]: 1.09863e-5 kg
- TOC, Total Organic Carbon [water, surface water]: 0.0582425 kg

## Sampling procedure
estimation

## Extrapolations
see Geography and Technology

## Review by Roberto Dones 2007-08-22
Passed

## Review by Emilia Moreno Ruiz 2014-05-26
PV adjusted
