# chemical factory construction, organics

Dataset: EcoSpold 2, unit process
Geography: RER
Time period: 2000-01-01 to 2022-12-31
Technology level: current
Classification: ISIC rev.4 ecoinvent: 4290:Construction of other civil engineering projects
Classification: EcoSpold01Categories: chemicals/organics
Synonyms: Chemiefabrik; Chemiewerk; chemical site
Tags: ConvertedDataset
Scenario: Business-as-Usual
System model: Allocation at the point of substitution
Generated by: Roland Hischier
Published in: Althaus H.-J. 2007
Database: ecoinvent
isCopyrightProtected: true

## General comment
[This dataset was already contained in the ecoinvent database version 2. It was not individually updated during the transfer to ecoinvent version 3. Life Cycle Impact Assessment results may still have changed, as they are affected by changes in the supply chain, i.e. in other datasets. This dataset was generated following the ecoinvent quality guidelines for version 2. It may have been subject to central changes described in the ecoinvent version 3 change report (http://www.ecoinvent.org/database/ecoinvent-version-3/reports-of-changes/), and the results of the central updates were reviewed extensively. The changes added e.g. consistent water flows and other information throughout the database. The documentation of this dataset can be found in the ecoinvent reports of version 2, which are still available via the ecoinvent website. The change report linked above covers all central changes that were made during the conversion process.]

## Included activities end
This process includes land use, buildings and facilities (inkl. demanteling) of an average chemical plant.

## Geography
estimation, based on data from two german chemical plant sites

## Technology
Based on informations from two chemical plant sites in Germany and their respective pictures, estimations about occupation of area are made. The weight of the facilities is based on personal information from one of these sites and on literature.

## Time period
estimation, based on information from 2002

## Reference product
- chemical factory, organics: 1 unit; By-product classification allocatable product; CPC 53269: Other constructions for manufacturing
  EcoSpold01Location=RER
  production volume 1.32237 unit
    This is a placeholder value that does not reflect real-world production volumes. This dataset does not currently require a real-world production volume to work in the database framework, and no actual data were collected yet. This has no negative effect on the results of the ecoinvent database. The placeholder value of this activity was scaled according to the nominal GDP of 2005 (source: United Nations, http://data.un.org/Glossary.aspx?q=GDP+%28current+US%24%29, accessed 20130726) to reflect an appropriate share of the global production volume, which is also a placeholder value.
  property price 5.28046e8 EUR2005
    Convert from EU 27 price to the world by currency exchange rate.
  properties: carbon allocation 0 kg, carbon content 0

## Inputs from technosphere
- building, hall, steel construction: 10483.5 m2; lognormal variance with pedigree 0.4787, pedigree (4,3,5,3,4)
  Estimated from two sites
  EcoSpold01Location=CH
  Uncertainty: estimated from two sites
- building, multi-storey: 157752 m3; lognormal variance with pedigree 0.4787, pedigree (4,3,5,3,4)
  Estimated from two sites
  EcoSpold01Location=RER
  Uncertainty: estimated from two sites
- chemical factory: 1.25802e7 kg; lognormal variance with pedigree 0.4787, pedigree (4,3,5,3,4)
  EcoSpold01Location=RER
  Estimated from personal information
  Uncertainty: estimated from personal information
- decommissioned chemical production facilities: -1.25802e7 kg; lognormal variance with pedigree 0.4387, pedigree (4,3,1,3,4)
  Estimated from personal information
  EcoSpold01Location=RER
  Uncertainty: estimated from personal information
  production volume
    Calculated from the production volume of chemical factory, organics in proportion to the respective output amounts.
  properties: carbon content, fossil 0.0169382, carbon content, non-fossil 5.78006e-6, dry mass 1 kg, wet mass 1 kg
  note on carbon content, fossil: Calculated from C content in input materials in the infrastructure

## Inputs from nature
- Occupation, construction site [natural resource, land]: 83868 m2*year; lognormal variance with pedigree 0.2187, pedigree (4,3,5,3,4)
  Estimated from two sites
  Uncertainty: estimated from two sites
- Occupation, industrial area [natural resource, land]: 2.72072e6 m2*year; lognormal variance with pedigree 0.2187, pedigree (4,3,5,3,4)
  Estimated from two sites
  Uncertainty: estimated from two sites
- Transformation, from unspecified [natural resource, land]: 54414.4 m2; lognormal variance with pedigree 0.2987, pedigree (4,3,5,3,4)
  Estimated from two sites
  Uncertainty: estimated from two sites
- Transformation, to industrial area [natural resource, land]: 54414.4 m2; lognormal variance with pedigree 0.2987, pedigree (4,3,5,3,4)
  Estimated from two sites
  Uncertainty: estimated from two sites

## Review by Heiko Kunst 2003-07-18
Passed.
