# electricity, high voltage, production mix

Dataset: EcoSpold 2, unit process, production mix
Geography: CN-ECGC
Time period: 2020-01-01 to 2022-12-31
Scenario: Business-as-Usual
System model: Allocation at the point of substitution
Generated by: [System]
Database: ecoinvent
isCopyrightProtected: true
accessRestrictedTo: 1

## Reference product
- electricity, high voltage: 1 kWh; By-product classification allocatable product; CPC 17100: Electrical energy
  production volume 1.44372e12 kWh
    The shares of electricity technologies on this market are valid for the year 2020. The shares been calculated by the data provider and don't correspond with the production volumes entered in the undefined datasets of the different electricity supplying technologies. The shares have been calculated based on statistics from 2020, except Inter-provincial exchanges are based on data from 2017:
    Generation Data:
    - National Bureau of Statistics Database Year 2020. Accessible via: https://data.stats.gov.cn/english/adv.htm?m=advquery&cn=E0101
    Transmission and distribution losses:
    - 2020 electricity & other energy statistics, translated and accessed via: https://chinaenergyportal.org/en/2020-electricity-other-energy-statistics-preliminary/
    Inter-provincial exchanges:
    - Li, W., Long, R., Zhang, L., He, Z., Chen, F. and Chen, H., 2020. Greenhouse Gas Emission Transfer of Inter-Provincial Electricity Trade in China. International Journal of Environmental Research and Public Health, 17(22), p.8375.
  properties: allocation factor 0.00710556, carbon allocation 0 kg, carbon content 0, exergy 0.0109004 MJ, price 0.0977 EUR2005, true value 0.000694214, true value relation 0.0109004

## Inputs from technosphere
- electricity, high voltage: 2.18094e-5, 0.0249093, 0.0122696, 0.0057303, 0.00801099, 0.000362068, 0.0369371, 0.0343935, 0.0457067, 0.00329228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 kWh (45 suppliers, which the file names only by identifier); sum of these 0.996586 kWh
  properties: price 0.0977 EUR2005
- electricity, high voltage: 0.000526426, 0.000617932, 0.00226936 kWh (3 suppliers, which the file names only by identifier); sum of these 0.00341372 kWh
  properties: exergy 3.6 MJ, price 0.0977 EUR2005
