# treatment of wastewater from soft fibreboard production, wastewater treatment

Dataset: EcoSpold 2, unit process
Geography: CH
Time period: 2010-01-01 to 2022-12-31
Technology level: current
Classification: ISIC rev.4 ecoinvent: 3700:Sewerage
Scenario: Business-as-Usual
System model: Allocation at the point of substitution
Generated by: Nikolia Stoikou
Database: ecoinvent
isCopyrightProtected: true

## General comment
This dataset represents the treatment of a wastewater, generated from an ordinary transforming activity. Purification in wastewater treatment of 'wastewater from soft fibreboard production'. Recommended use of this dataset: to be used for wastewaters, generated from ordinary transforming activities, of equal or similar composition. The wastewater has a content of TOC: 1.1685 kg/m3, COD: 4.55556 kg/m3 and BOD: 2.2033 kg/m3. TOC is equal to C present in the wastewater, COD is calculated as TOC/0.2565 and BOD is calculated as COD/0.53034. Detailed elemental composition can be found in the properties of the wastewater treated. Share of biogenic carbon in the sludge: 100%.

## Included activities start
The activity starts with the wastewater being available at the gate of the treatment facility. Collection and transportation of the wastewater to the treatment plant is not included.

## Included activities end
The activity ends with the wastewater being treated and waste-specific emissions released to the environment. Expenditures from treatment of wastewater in waste treatment plant are included as well as relevant infrastructure of the plant. Emissions from any sludge digestion, biogas generation and utilization (heeding specific wastewater composition) are also included. Waste-specific direct emissions of untreated wastewater and required territory-specific infrastructure for sewers are not contained within this dataset but instead in the regional market datasets for this wastewater.

## Geography
The site has mean annual temperature (MAT) of 9.5 degC, mean annual precipitation (MAP) of 1483.00559816076 mm/year, mean annual actual evaporation (EAT) of 528.63778611689 mm/year. In the WWT plant, 0% of its water input are lost due to evaporation from pools, 0.0627% of water is *gained* from organic mass degradation, and 0.121% is removed off site via sludge disposal. (References: UN data, 2020. Precipitation, Environment Statistics Database, United Nations Statistics Division Available at: http://data.un.org/Data.aspx?q=precipitation&d=ENV&f=variableID%3a6; World Bank, 2022. Surface area (sq.km), World Bank Group Available at: https://data.worldbank.org/indicator/AG.SRF.TOTL.K2; MeteoSwiss, 2022. Data on Swiss temperature mean, Federal Department of Home Affairs FDHA. Federal Office of Meteorology and Climatology. Swiss Climate Available at: https://www.MeteoSwiss.admin.ch/home/climate/swiss-climate-in-detail/Swiss-temperature-mean/Data-on-the-Swiss-temperature-mean.html?query=TEMPERATURE+DATA&topic=/content/MeteoSwiss/tags/topics/klima&pageIndex=0&tab=search_tab; Doka G.,2021. A model for composition-specific life cycle inventories of regionalised wastewater fates, Zurich, Switzerland. http://www.doka.ch/publications.htm)

## Technology
This activity represents the treatment of a specific wastewater in a WWT plant (while direct emissions and sewering are heeded in the upstream market dataset for this wastewater). The size of the treatment plant infrastructure is for a national average territory situation. The assumed size of the WWTP treats 90.6 Mio m3 per year. The mixture of WWTP with one, two, or three stages is 0%-11.2%-88.8%. The actual, waste-specific oxygen requirement in the biological stages is 0.9519kg O. Generated waste-specific raw sludge is treated with anaerobic digestion. The digestion process produces 916.1 litres of biogas with an energy content of 21.21MJ. 23.6% of the biogas is utilized for energy. The remainder is flared. The gross electric efficiency is 26.564%. The gross thermal efficiency is 47.853%. After digestion, the remaining total sludge mass (dry matter) is 0.7516kg DM.

## Reference product
- iron scrap, sorted, pressed: 1 kg; By-product classification Recyclable; CPC 39310: Slag, dross, scalings and other waste from the manufacture of iron or steel; lognormal variance with pedigree 0.3109, pedigree (1,1,1,1,1)
  scrap output from used infrastructure for wastewater treatment plant.
  Uncertainty: Uncertainty calculated from wastewater technosphere fate uncertainty and treatment infrastructure uncertainty.
  production volume 1.87484 kg
    Calculated in proportion to wastewater reference product.
  property price 0.175 EUR2005
    Temporary price data. Calculated as 90% of purchasers price based on: 2005 import and export prices (total trades (USD) divided by total weight (kg) in biggest economies of the world: EU27, USA, Brasil, China, India, Japan and Russia) from UN Commodity Trade Statistics Database (http://data.un.org/Explorer.aspxDatabase [Accessed 2011.06.20]). Commodity: Waste or scrap, of cast iron
  properties: carbon allocation 0 kg, carbon content 0, carbon content, fossil 0, carbon content, non-fossil 0, dry mass 1 kg, water content 0, water in wet mass 0 kg, wet mass 1 kg

## Inputs from technosphere
- acrylic dispersion, with water, in 58% solution state: 1.90696e-7 kg
- acrylic varnish, with water, in 53% solution state: 6.26573e-8 kg
- aluminium scrap, post-consumer: -3.9902e-6 kg
- aluminium sulfate, powder: 0.000103168 kg
- aluminium, wrought alloy: 3.9902e-6 kg
- corrugated board box: 4.2086e-6, 9.76859e-6, 1.56771e-7 kg (3 suppliers, which the file names only by identifier); sum of these 1.4134e-5 kg
- electricity, low voltage: 3.26134e-6, 6.46322e-6, 6.20861e-5, 1.10752e-6, 2.21894e-5, 2.01408e-7, 1.53808e-5, 4.52926e-6 kWh (8 suppliers, which the file names only by identifier); sum of these 0.000115219 kWh
- electricity, medium voltage: 0.123274 kWh
- ethylene glycol monoethyl ether: 8.39704e-8 kg
- furnace, wood chips, with silo, 1000kW: 6.52838e-9 unit
- heat, district or industrial, natural gas: 6.7477e-5, 0.000182714, 3.00246e-6, 0.465125 MJ (4 suppliers, which the file names only by identifier); sum of these 0.465378 MJ
- heat, district or industrial, other than natural gas: 0.163695 MJ
- industrial machine, heavy, unspecified: 3.49343e-8 kg
- inert waste, for final disposal: -9.32129e-5 kg
- isopropanol: 3.49343e-7 kg
- latex: 0.00186239 kg
- maize starch: 2.75628e-8 kg
- municipal solid waste: -0.00304529 kg
- paper, woodfree, coated: 0.000222746 kg
- paraffin: 0.00130475 kg
- printing ink, offset, without solvent, in 47.5% solution state: 1.48551e-6 kg
- pulpwood, softwood, measured as solid wood under bark: 3.16801e-6 m3
- raw sewage sludge: -0.00678054 kg
- sheet rolling, aluminium: 3.9902e-6 kg
- slab and siding, softwood, wet, measured as dry mass: 0.0216138 kg
- spent solvent mixture: -1.72839e-7, -6.75343e-8 kg (2 suppliers, which the file names only by identifier); sum of these -2.40373e-7 kg
- synthetic rubber: 2.86846e-8 kg
- tap water: 0.518925 kg
- textile, woven cotton: 4.51902e-8 kg
- thermoforming, with calendering: 6.37791e-8 kg
- vinyl acetate: 0.00237722 kg
- waste emulsion paint: -4.12973e-8, -3.89286e-9 kg (2 suppliers, which the file names only by identifier); sum of these -4.51902e-8 kg
- waste paper, unsorted: -3.12485e-5, -3.12485e-5 kg (2 suppliers, which the file names only by identifier); sum of these -6.24971e-5 kg
- waste paperboard, unsorted: -7.06698e-6, -7.06698e-6 kg (2 suppliers, which the file names only by identifier); sum of these -1.4134e-5 kg
- wastewater from soft fibreboard production: -0.000351441 m3
- white spirit: 4.88759e-7 kg
- wood ash mixture, pure: -0.000148374 kg
- wood chips, dry, measured as dry mass: 0.219706 kg
- wooden board factory, organic bonded boards: 7.7714e-12 unit

## Inputs from nature
- Water, cooling, unspecified natural origin [natural resource, in water]: 0.00105718 m3

## Emissions to nature
- 2-Propanol [air, urban air close to ground]: 3.49343e-7 kg
- Acetaldehyde [air, unspecified]: 1.81016e-8 kg
- Ammonia [air, unspecified]: 5.13374e-7 kg
- Arsenic ion [air, unspecified]: 2.96748e-10 kg
- Benzene [air, unspecified]: 2.7004e-7 kg
- Benzene, ethyl- [air, unspecified]: 8.90243e-9 kg
- Benzene, ethyl- [air, urban air close to ground]: 1.55281e-8 kg
- Benzene, hexachloro- [air, unspecified]: 2.13658e-15 kg
- Benzo(a)pyrene [air, unspecified]: 1.48374e-10 kg
- Bromine [air, unspecified]: 1.78049e-8 kg
- Cadmium II [air, unspecified]: 2.07723e-10 kg
- Calcium [air, unspecified]: 1.73597e-6 kg
- Carbon dioxide, non-fossil [air, unspecified]: 0.031752 kg
- Carbon monoxide, non-fossil [air, unspecified]: 8.90243e-5 kg
- Chlorine [air, unspecified]: 5.34146e-8 kg
- Chromium III [air, unspecified]: 1.17512e-9 kg
- Chromium VI [air, unspecified]: 1.18699e-11 kg
- Copper ion [air, unspecified]: 6.52845e-9 kg
- Dinitrogen monoxide [air, unspecified]: 6.8252e-7 kg
- Dioxins, measured as 2,3,7,8-tetrachlorodibenzo-p-dioxin [air, unspecified]: 9.19918e-15 kg
- Fluorine [air, unspecified]: 1.48374e-8 kg
- Formaldehyde [air, unspecified]: 3.85772e-8 kg
- Heptane [air, urban air close to ground]: 1.51916e-7 kg
- Hydrocarbons, aliphatic, alkanes, unspecified [air, unspecified]: 2.7004e-7 kg
- Hydrocarbons, aliphatic, unsaturated [air, unspecified]: 9.19918e-7 kg
- Lead II [air, unspecified]: 7.41869e-9 kg
- Magnesium [air, unspecified]: 1.06829e-7 kg
- Manganese II [air, unspecified]: 5.04471e-8 kg
- Mercury II [air, unspecified]: 8.90243e-11 kg
- Methane, non-fossil [air, unspecified]: 8.90243e-7 kg
- Methanol [air, urban air close to ground]: 1.60249e-8 kg
- NMVOC, non-methane volatile organic compounds [air, unspecified]: 9.82787e-6 kg
- Nickel II [air, unspecified]: 1.78049e-9 kg
- Nitrogen oxides [air, unspecified]: 6.67683e-5 kg
- PAH, polycyclic aromatic hydrocarbons [air, unspecified]: 3.2939e-9 kg
- Particulate Matter, < 2.5 um [air, unspecified]: 1.33537e-5 kg
- Particulate Matter, > 10 um [air, urban air close to ground]: 8.52095e-6 kg
- Particulate Matter, > 2.5 um and < 10um [air, unspecified]: 7.41869e-7 kg
- Phenol, pentachloro- [air, unspecified]: 2.40366e-12 kg
- Phosphorus [air, unspecified]: 8.90243e-8 kg
- Potassium I [air, unspecified]: 6.9439e-6 kg
- Propylene oxide [air, urban air close to ground]: 2.91653e-8 kg
- Sodium [air, unspecified]: 3.85772e-7 kg
- Sulfur dioxide [air, unspecified]: 7.41869e-7 kg
- Toluene [air, unspecified]: 8.90243e-8 kg
- Toluene [air, urban air close to ground]: 1.37173e-8 kg
- Water [air, unspecified]: 0.000632794 m3
- Xylene [air, urban air close to ground]: 1.37173e-8 kg
- Zinc II [air, unspecified]: 8.90243e-8 kg
- m-Xylene [air, unspecified]: 3.56097e-8 kg
- Water [water, unspecified]: 0.000591868 m3
