# maintenance, barge

Dataset: EcoSpold 2, unit process
Geography: RoW
Time period: 1990-01-01 to 2022-12-31
Technology level: current
Classification: EcoSpold01Categories: transport systems/ship
Classification: ISIC rev.4 ecoinvent: 3315:Repair of transport equipment, except motor vehicles
Tags: ConvertedDataset
Scenario: Business-as-Usual
System model: Allocation at the point of substitution
Generated by: Michael Spielmann (obsolete)
Published in: Spielmann M. 2007
Database: ecoinvent
isCopyrightProtected: true

## General comment
The ship is painted 10 times in its entire life span (40 yrs) . The consumption of lubricates is included in the fuel consumption for vessel operation.
[This dataset was already contained in the ecoinvent database version 2. It was not individually updated during the transfer to ecoinvent version 3. Life Cycle Impact Assessment results may still have changed, as they are affected by changes in the supply chain, i.e. in other datasets. This dataset was generated following the ecoinvent quality guidelines for version 2. It may have been subject to central changes described in the ecoinvent version 3 change report (http://www.ecoinvent.org/database/ecoinvent-version-3/reports-of-changes/), and the results of the central updates were reviewed extensively. The changes added e.g. consistent water flows and other information throughout the database. The documentation of this dataset can be found in the ecoinvent reports of version 2, which are still available via the ecoinvent website. The change report linked above covers all central changes that were made during the conversion process.]

## Included activities end
This inventory includes the use of paint and emissions of the solvent of the paint as NMVOC. Consumption of lubricates are excluded.

## Geography
Europe

## Reference product
- maintenance, barge: 1 unit; By-product classification allocatable product; CPC 87149: Maintenance and repair services of other transport equipment
  EcoSpold01Location=RER
  production volume 2.67763 unit
    This is a placeholder value that does not reflect real-world production volumes. This dataset does not currently require a real-world production volume to work in the database framework, and no actual data were collected yet. This has no negative effect on the results of the ecoinvent database.
  property price 146932 EUR2005
    Calculated based on inputs: The price of the product has been calculated as a sum of the values of the material and energy inputs for this product. This value is therefore a rough estimation. It may underestimate the real price since there are additional expenses when producing any product. These expences can include for example labour costs, treatment of waste materials and profit for the producer. Please consider carefully whether this level of data quality is acceptable for your application.
  properties: carbon allocation 0 kg, carbon content 0

## Inputs from technosphere
- alkyd paint, white, without solvent, in 60% solution state: 43600 kg; lognormal variance with pedigree 0.162, pedigree (1,1,5,5,1)
  Literature studies. The value is a worst case assumption, assuming that all paint has a solvent conten of 60%.
  EcoSpold01Location=RER
  properties: carbon content, fossil 0.140367, carbon content, non-fossil 0.199629, dry mass 1 kg, heating value, net 10.3 MJ, wet mass 1 kg
  note on carbon content, fossil: C content was calculated as an addition of C content in the raw materials.

## Emissions to nature
- NMVOC, non-methane volatile organic compounds [air, non-urban air or from high stacks]: 15700 kg; lognormal variance with pedigree 0.162, pedigree (1,1,5,5,1)
  Derived from the used paint, assuming all solvent is emitted to air.

## Sampling procedure
literature studies and own assumptions

## Extrapolations
none This dataset has been copied from an original dataset covering the geography RER. The uncertainty has been adjusted accordingly.

## Review by Niels Jungbluth 2003-08-27
passed.
