# treatment of waste plastic, consumer electronics, open burning

Dataset: EcoSpold 2, unit process
Geography: GLO
Time period: 2006-01-01 to 2022-12-31
Technology level: current
Classification: ISIC rev.4 ecoinvent: 3821:Treatment and disposal of non-hazardous waste
Synonyms: open, uncontrolled burning
Scenario: Business-as-Usual
System model: Allocation at the point of substitution
Share of production covered: 1 %
Generated by: Avraam Symeonidis
Database: ecoinvent
isCopyrightProtected: true

## General comment
This dataset represents the activity of waste disposal of waste plastic, consumer electronics in uncontrolled, open burning. Recommended use of this dataset: This waste represents the non-recycled reject flow of plastics from electronics recycling. // Waste composition (wet, in ppm): upper heating value 36.29 MJ/kg; lower heating value 34.78 MJ/kg; H2O 11129; O 41000; H 75000; C 821000; S 300; N 13100; P 600; B n.a.; Cl 6300; Br 6800; F 130; I n.a.; Ag n.a.; As 10; Ba 137; Cd 115; Co 29.478; Cr 34; Cu 3194.1; Hg 1.4; Mn 4; Mo 2; Ni 703; Pb 127; Sb 4795.2; Se 1.9596; Sn 267; V 0.5; Zn 361; Be 0.46656; Sc n.a.; Sr 82.582; Ti 4187; Tl 0.37325; W n.a.; Si 3547; Fe 1483; Ca 3177; Al 2020; K 233; Mg n.a.; Na 128; . Share of carbon in waste that is biogenic 0%. // Recycling rates for metallic iron = 0% for metallic aluminium = 0% for metallic copper = 0% . A mass of 0.061kg residues are left on ground.

## Included activities start
open burning starting from waste placement on burning site (without transports to the site)

## Included activities end
Waste-specific emissions to air and soil from open burning.

## Geography
Generic open burning without any geographical distinction.

## Technology
This is an inventory for open burning of solid waste. Informal or uncontrolled burning. No flue gas treatment. Suitable for informal recycling (e.g. burning of e-waste). Based on Municipal waste incineration without any pollution control. Residues (minus any actually recycled metals) are left on site. Assumption of share of thermal NOx to total NOx in average waste burning process is 30%. Contribution from thermal NOx is 810mg per kg waste. Recycling rates for metallic iron = 0% for metallic aluminium = 0% for metallic copper = 0% .

## Time period
generic open burning without any temporal distinction

## Reference product
- waste plastic, consumer electronics: -1 kg; By-product classification Waste; CPC 39270: Waste, parings and scrap of plastics
  main reference product of this activity (supply of disposal service).
  production volume 4 kg
    placeholder
  property heating value, net 34.78 MJ
    Assumed equal to "waste plastic, consumer electronics, sorted".
  property price 0 EUR2005
    Waste products are assigned a price of zero as they are assumed to require further treatment.
  properties: aluminium content 0.0020427, antimony content 0.0048492, arsenic content 1.0113e-5, barium content 0.00013854, beryllium content 4.7181e-7, bromine content 0.0068765, cadmium content 0.00011629, calcium content 0.0032128, carbon allocation 0.820999 kg, carbon content 0.83024, carbon content, fossil 0.83024, chlorine content 0.0063709, chromium content 3.4383e-5, cobalt content 2.9809e-5, copper content 0.0032301, dry mass 0.98887 kg, fluorine content 0.00013146, heating value, gross 36.287 MJ, hydrogen content 0.075844, iron content 0.0014997, lead content 0.00012843, manganese content 4.045e-6, mercury content 1.4158e-6, molybdenum content 2.0225e-6, nickel content 0.00071091, nitrogen content 0.013247, oxygen content 0.041461, phosphorus content 0.00060675, potassium content 0.00023562, selenium content 1.9816e-6, silicon content 0.0035869, sodium content 0.00012944, strontium content 8.3511e-5, sulfur content 0.00030338, thallium content 3.7745e-7, tin content 0.00027, titanium content 0.0042341, vanadium content 5.0563e-7, water content 0.011254, water in wet mass 0.011129 kg, wet mass 1 kg, zinc content 0.00036506

## Inputs from nature
- Oxygen [natural resource, in air]: 2.7414 kg; lognormal variance with pedigree 0.01695, pedigree (1,1,4,1,1)
  oxygen from ambient air needed to combust and oxidise this waste. Net demand, i.e. without air O2 leaving the process uncombusted.
  Uncertainty: uncertainty is calculated from uncertainties in waste composition and transfer coefficients to flue gas and soild residues

## Emissions to nature
- Acetaldehyde [air, non-urban air or from high stacks]: 0.0004284 kg; lognormal variance with pedigree 0.0491, pedigree (1,1,4,1,1)
  Process-specific (constant) emissions to air from open burning.
  Uncertainty: uncertainty generic estimate
- Aluminium III [air, non-urban air or from high stacks]: 1.6651e-6 kg; lognormal variance with pedigree 0.68195, pedigree (1,1,4,1,1)
  Emissions to air from open burning.
  Uncertainty: Uncertainty calculated depending on waste input and uncertainty of transfer coefficents in incineration model.
- Antimony ion [air, non-urban air or from high stacks]: 1.1524e-8 kg; lognormal variance with pedigree 0.75081, pedigree (1,1,4,1,1)
  (same comment as for Aluminium III)
- Arsenic ion [air, non-urban air or from high stacks]: 8.5229e-8 kg; lognormal variance with pedigree 1.3294, pedigree (1,1,4,1,1)
  (same comment as for Aluminium III)
- Barium II [air, non-urban air or from high stacks]: 5.6466e-6 kg; lognormal variance with pedigree 0.9539, pedigree (1,1,4,1,1)
  (same comment as for Aluminium III)
- Benzene [air, non-urban air or from high stacks]: 0.00097975 kg; lognormal variance with pedigree 0.0491, pedigree (1,1,4,1,1)
  (same comment as for Acetaldehyde)
- Benzene, ethyl- [air, non-urban air or from high stacks]: 0.00032746 kg; lognormal variance with pedigree 0.0491, pedigree (1,1,4,1,1)
  (same comment as for Acetaldehyde)
- Beryllium II [air, non-urban air or from high stacks]: 8.8183e-10 kg; lognormal variance with pedigree 1.7625, pedigree (1,1,4,1,1)
  (same comment as for Aluminium III)
- Bromine [air, non-urban air or from high stacks]: 0.0021806 kg; lognormal variance with pedigree 0.42572, pedigree (1,1,4,1,1)
  (same comment as for Aluminium III)
- Cadmium II [air, non-urban air or from high stacks]: 6.5064e-7 kg; lognormal variance with pedigree 1.0133, pedigree (1,1,4,1,1)
  (same comment as for Aluminium III)
- Calcium [air, non-urban air or from high stacks]: 7.5008e-5 kg; lognormal variance with pedigree 0.55151, pedigree (1,1,4,1,1)
  (same comment as for Aluminium III)
- Carbon dioxide, fossil [air, non-urban air or from high stacks]: 2.9184 kg; lognormal variance with pedigree 0.0092932, pedigree (1,1,4,1,1)
  Emissions to air from open burning.
  Uncertainty: Uncertainty calculated depending on waste input, uncertainty of transfer coefficents in incineration model,and uncertainty in CO and CH4 emissions.
- Carbon monoxide, fossil [air, non-urban air or from high stacks]: 0.0386 kg; lognormal variance with pedigree 0.65557, pedigree (1,1,4,1,1)
  (same comment as for Acetaldehyde)
- Chromium III [air, non-urban air or from high stacks]: 5.07e-8 kg; lognormal variance with pedigree 1.2061, pedigree (1,1,4,1,1)
  (same comment as for Aluminium III)
- Cobalt II [air, non-urban air or from high stacks]: 1.1889e-6 kg; lognormal variance with pedigree 1.1587, pedigree (1,1,4,1,1)
  (same comment as for Aluminium III)
- Copper ion [air, non-urban air or from high stacks]: 3.5106e-6 kg; lognormal variance with pedigree 0.61622, pedigree (1,1,4,1,1)
  (same comment as for Aluminium III)
- Dinitrogen monoxide [air, non-urban air or from high stacks]: 0.00011625 kg; lognormal variance with pedigree 0.0491, pedigree (1,1,4,1,1)
  (same comment as for Aluminium III)
- Dioxins, measured as 2,3,7,8-tetrachlorodibenzo-p-dioxin [air, non-urban air or from high stacks]: 1.4236e-10 kg; lognormal variance with pedigree 0.9119, pedigree (1,1,4,1,1)
  Process-specific (constant) emissions to air from open burning.
  Uncertainty: Uncertainty calculated from uncetainty in Chlorine content in waste and estimation formula
- Formaldehyde [air, non-urban air or from high stacks]: 0.00044365 kg; lognormal variance with pedigree 0.0491, pedigree (1,1,4,1,1)
  (same comment as for Acetaldehyde)
- Hydrochloric acid [air, non-urban air or from high stacks]: 0.0043213 kg; lognormal variance with pedigree 0.43193, pedigree (1,1,4,1,1)
  (same comment as for Aluminium III)
- Hydrogen fluoride [air, non-urban air or from high stacks]: 1.4589e-5 kg; lognormal variance with pedigree 0.94841, pedigree (1,1,4,1,1)
  (same comment as for Aluminium III)
- Iron ion [air, non-urban air or from high stacks]: 2.687e-6 kg; lognormal variance with pedigree 0.70213, pedigree (1,1,4,1,1)
  (same comment as for Aluminium III)
- Lead II [air, non-urban air or from high stacks]: 1.0672e-6 kg; lognormal variance with pedigree 0.99197, pedigree (1,1,4,1,1)
  (same comment as for Aluminium III)
- Manganese II [air, non-urban air or from high stacks]: 3.4048e-8 kg; lognormal variance with pedigree 1.4501, pedigree (1,1,4,1,1)
  (same comment as for Aluminium III)
- Mercury II [air, non-urban air or from high stacks]: 8.4848e-7 kg; lognormal variance with pedigree 1.5345, pedigree (1,1,4,1,1)
  (same comment as for Aluminium III)
- Methane, fossil [air, non-urban air or from high stacks]: 0.0059 kg; lognormal variance with pedigree 0.0491, pedigree (1,1,4,1,1)
  (same comment as for Acetaldehyde)
- Molybdenum VI [air, non-urban air or from high stacks]: 9.9837e-9 kg; lognormal variance with pedigree 1.5519, pedigree (1,1,4,1,1)
  (same comment as for Aluminium III)
- Nickel II [air, non-urban air or from high stacks]: 1.003e-6 kg; lognormal variance with pedigree 0.80525, pedigree (1,1,4,1,1)
  (same comment as for Aluminium III)
- Nitrogen oxides [air, non-urban air or from high stacks]: 0.01674 kg; lognormal variance with pedigree 0.31613, pedigree (1,1,4,1,1)
  (same comment as for Aluminium III)
- PAH, polycyclic aromatic hydrocarbons [air, non-urban air or from high stacks]: 0.0003443 kg; lognormal variance with pedigree 0.30974, pedigree (1,1,4,1,1)
  (same comment as for Acetaldehyde)
- Particulate Matter, < 2.5 um [air, non-urban air or from high stacks]: 0.0046626 kg; lognormal variance with pedigree 0.26038, pedigree (1,1,4,1,1)
  (same comment as for Aluminium III)
- Particulate Matter, > 10 um [air, non-urban air or from high stacks]: 0.0017933 kg; lognormal variance with pedigree 0.26038, pedigree (1,1,4,1,1)
  (same comment as for Aluminium III)
- Particulate Matter, > 2.5 um and < 10um [air, non-urban air or from high stacks]: 0.0025106 kg; lognormal variance with pedigree 0.26038, pedigree (1,1,4,1,1)
  (same comment as for Aluminium III)
- Phenol [air, non-urban air or from high stacks]: 1.4799e-5 kg; lognormal variance with pedigree 0.0491, pedigree (1,1,4,1,1)
  (same comment as for Acetaldehyde)
- Phosphorus [air, non-urban air or from high stacks]: 4.1224e-6 kg; lognormal variance with pedigree 0.79039, pedigree (1,1,4,1,1)
  (same comment as for Aluminium III)
- Polychlorinated biphenyls [air, non-urban air or from high stacks]: 1.1189e-7 kg; lognormal variance with pedigree 0.0491, pedigree (1,1,4,1,1)
  (same comment as for Acetaldehyde)
- Potassium I [air, non-urban air or from high stacks]: 3.4534e-6 kg; lognormal variance with pedigree 0.9004, pedigree (1,1,4,1,1)
  (same comment as for Aluminium III)
- Selenium IV [air, non-urban air or from high stacks]: 1.6983e-7 kg; lognormal variance with pedigree 1.5057, pedigree (1,1,4,1,1)
  (same comment as for Aluminium III)
- Silicon [air, non-urban air or from high stacks]: 1.6574e-8 kg; lognormal variance with pedigree 0.76605, pedigree (1,1,4,1,1)
  (same comment as for Aluminium III)
- Sodium [air, non-urban air or from high stacks]: 3.1527e-6 kg; lognormal variance with pedigree 0.97109, pedigree (1,1,4,1,1)
  (same comment as for Aluminium III)
- Strontium [air, non-urban air or from high stacks]: 8.2582e-8 kg; lognormal variance with pedigree 1.0979, pedigree (1,1,4,1,1)
  (same comment as for Aluminium III)
- Styrene [air, non-urban air or from high stacks]: 0.0005275 kg; lognormal variance with pedigree 0.0491, pedigree (1,1,4,1,1)
  (same comment as for Acetaldehyde)
- Sulfur dioxide [air, non-urban air or from high stacks]: 0.00012921 kg; lognormal variance with pedigree 0.83419, pedigree (1,1,4,1,1)
  (same comment as for Aluminium III)
- Thallium I [air, non-urban air or from high stacks]: 7.465e-10 kg; lognormal variance with pedigree 1.7898, pedigree (1,1,4,1,1)
  (same comment as for Aluminium III)
- Tin ion [air, non-urban air or from high stacks]: 5.2322e-10 kg; lognormal variance with pedigree 1.1321, pedigree (1,1,4,1,1)
  (same comment as for Aluminium III)
- Titanium ion [air, non-urban air or from high stacks]: 4.4396e-5 kg; lognormal variance with pedigree 0.5313, pedigree (1,1,4,1,1)
  (same comment as for Aluminium III)
- Toluene [air, non-urban air or from high stacks]: 0.000372 kg; lognormal variance with pedigree 0.0491, pedigree (1,1,4,1,1)
  (same comment as for Acetaldehyde)
- Vanadium V [air, non-urban air or from high stacks]: 3.8604e-8 kg; lognormal variance with pedigree 1.684, pedigree (1,1,4,1,1)
  (same comment as for Aluminium III)
- Water [air, urban air close to ground]: 0.00061113 m3; lognormal variance with pedigree 0.15041, pedigree (1,1,4,1,1)
  water vapour from waste humidity, hydrogen oxidation.
  Uncertainty: Uncertainty calculated from uncertainty in waste composition and the uncertainty of fraction to air.
- Zinc II [air, non-urban air or from high stacks]: 2.6858e-6 kg; lognormal variance with pedigree 0.85577, pedigree (1,1,4,1,1)
  (same comment as for Aluminium III)
- Aluminium III [soil, industrial]: 0.0020183 kg; lognormal variance with pedigree 0.57459, pedigree (1,1,4,1,1)
  Emissions from open burning to residues left on ground.
  Uncertainty: Uncertainty calculated depending on waste input and uncertainty of transfer coefficents in incineration model.
- Antimony ion [soil, industrial]: 0.0047952 kg; lognormal variance with pedigree 0.4652, pedigree (1,1,4,1,1)
  (same comment as for Aluminium III)
- Arsenic ion [soil, industrial]: 9.9148e-6 kg; lognormal variance with pedigree 1.2759, pedigree (1,1,4,1,1)
  (same comment as for Aluminium III)
- Barium II [soil, industrial]: 0.00013135 kg; lognormal variance with pedigree 0.92814, pedigree (1,1,4,1,1)
  (same comment as for Aluminium III)
- Beryllium II [soil, industrial]: 4.6568e-7 kg; lognormal variance with pedigree 1.6758, pedigree (1,1,4,1,1)
  (same comment as for Aluminium III)
- Bromine [soil, industrial]: 0.0046194 kg; lognormal variance with pedigree 0.42252, pedigree (1,1,4,1,1)
  (same comment as for Aluminium III)
- Cadmium II [soil, industrial]: 0.00011435 kg; lognormal variance with pedigree 0.95142, pedigree (1,1,4,1,1)
  (same comment as for Aluminium III)
- Calcium [soil, industrial]: 0.003102 kg; lognormal variance with pedigree 0.51688, pedigree (1,1,4,1,1)
  (same comment as for Aluminium III)
- Carbon [soil, industrial]: 0.0041174 kg; lognormal variance with pedigree 0.073727, pedigree (1,1,4,1,1)
  (same comment as for Aluminium III)
- Chloride [soil, industrial]: 0.0020972 kg; lognormal variance with pedigree 0.43485, pedigree (1,1,4,1,1)
  (same comment as for Aluminium III)
- Chromium III [soil, industrial]: 3.3949e-5 kg; lognormal variance with pedigree 1.1136, pedigree (1,1,4,1,1)
  (same comment as for Aluminium III)
- Cobalt II [soil, industrial]: 2.8289e-5 kg; lognormal variance with pedigree 1.1326, pedigree (1,1,4,1,1)
  (same comment as for Aluminium III)
- Copper ion [soil, industrial]: 0.0031906 kg; lognormal variance with pedigree 0.5162, pedigree (1,1,4,1,1)
  (same comment as for Aluminium III)
- Dioxins, measured as 2,3,7,8-tetrachlorodibenzo-p-dioxin [soil, industrial]: 3.9543e-11 kg; lognormal variance with pedigree 1.3924, pedigree (1,1,4,1,1)
  (same comment as for Dioxins, measured as 2,3,7,8-tetrachlorodibenzo-p-dioxin)
- Fluoride [soil, industrial]: 0.00011614 kg; lognormal variance with pedigree 0.93515, pedigree (1,1,4,1,1)
  (same comment as for Aluminium III)
- Iron ion [soil, industrial]: 0.0014803 kg; lognormal variance with pedigree 0.61441, pedigree (1,1,4,1,1)
  (same comment as for Aluminium III)
- Lead II [soil, industrial]: 0.00012593 kg; lognormal variance with pedigree 0.93822, pedigree (1,1,4,1,1)
  (same comment as for Aluminium III)
- Manganese II [soil, industrial]: 3.966e-6 kg; lognormal variance with pedigree 1.3966, pedigree (1,1,4,1,1)
  (same comment as for Aluminium III)
- Mercury II [soil, industrial]: 5.5152e-7 kg; lognormal variance with pedigree 1.5362, pedigree (1,1,4,1,1)
  (same comment as for Aluminium III)
- Molybdenum VI [soil, industrial]: 1.99e-6 kg; lognormal variance with pedigree 1.4873, pedigree (1,1,4,1,1)
  (same comment as for Aluminium III)
- Nickel II [soil, industrial]: 0.000702 kg; lognormal variance with pedigree 0.71172, pedigree (1,1,4,1,1)
  (same comment as for Aluminium III)
- Nitrogen [soil, industrial]: 0.00013116 kg; lognormal variance with pedigree 0.39367, pedigree (1,1,4,1,1)
  (same comment as for Aluminium III)
- Phosphorus [soil, industrial]: 0.00059588 kg; lognormal variance with pedigree 0.73253, pedigree (1,1,4,1,1)
  (same comment as for Aluminium III)
- Potassium I [soil, industrial]: 0.00022955 kg; lognormal variance with pedigree 0.85756, pedigree (1,1,4,1,1)
  (same comment as for Aluminium III)
- Selenium IV [soil, industrial]: 1.7897e-6 kg; lognormal variance with pedigree 1.49, pedigree (1,1,4,1,1)
  (same comment as for Aluminium III)
- Silicon [soil, industrial]: 0.003547 kg; lognormal variance with pedigree 0.50297, pedigree (1,1,4,1,1)
  (same comment as for Aluminium III)
- Sodium [soil, industrial]: 0.00012485 kg; lognormal variance with pedigree 0.93717, pedigree (1,1,4,1,1)
  (same comment as for Aluminium III)
- Strontium [soil, industrial]: 8.2499e-5 kg; lognormal variance with pedigree 0.9955, pedigree (1,1,4,1,1)
  (same comment as for Aluminium III)
- Sulfur [soil, industrial]: 0.00025693 kg; lognormal variance with pedigree 0.82412, pedigree (1,1,4,1,1)
  (same comment as for Aluminium III)
- Thallium I [soil, industrial]: 3.725e-7 kg; lognormal variance with pedigree 1.7044, pedigree (1,1,4,1,1)
  (same comment as for Aluminium III)
- Tin ion [soil, industrial]: 0.000267 kg; lognormal variance with pedigree 0.83949, pedigree (1,1,4,1,1)
  (same comment as for Aluminium III)
- Titanium ion [soil, industrial]: 0.0041426 kg; lognormal variance with pedigree 0.48213, pedigree (1,1,4,1,1)
  (same comment as for Aluminium III)
- Vanadium V [soil, industrial]: 4.614e-7 kg; lognormal variance with pedigree 1.6669, pedigree (1,1,4,1,1)
  (same comment as for Aluminium III)
- Zinc II [soil, industrial]: 0.00035831 kg; lognormal variance with pedigree 0.79955, pedigree (1,1,4,1,1)
  (same comment as for Aluminium III)

## Review by Gabor Doka 2018-05-14
passed
