# treatment of waste polystyrene, municipal incineration with fly ash extraction

Dataset: EcoSpold 2, unit process
Geography: CH
Time period: 2006-01-01 to 2022-12-31
Technology level: current
Classification: ISIC rev.4 ecoinvent: 3821:Treatment and disposal of non-hazardous waste
Synonyms: municipal waste incineration
Scenario: Business-as-Usual
System model: Allocation at the point of substitution
Share of production covered: 1.8 %
Generated by: Gabor Doka
Published in: Doka G. 2015
Database: ecoinvent
isCopyrightProtected: true

## General comment
This dataset represents the activity of waste disposal of waste polystyrene in a municipal solid waste incinerator (MSWI) // Recommended use of this dataset: For PS, which goes to disposal as part of communal waste mixture. For Expanded PS (EPS) use other dataset. // // Waste composition (wet, in ppm): upper heating value 38.88 MJ/kg; lower heating value 38.67 MJ/kg; H2O 2000; O 38852; H 78046; C 868490; S 678.75; N 1942.6; P n.a.; B n.a.; Cl 1132.1; Br 882.12; F 14.25; I n.a.; Ag n.a.; As 1.8418; Ba 180.79; Cd 23.336; Co 30.622; Cr 39.613; Cu 107.56; Hg 0.82311; Mn 77.469; Mo n.a.; Ni 19.968; Pb 14.935; Sb 41.65; Se 2.0357; Sn 25.403; V 279.32; Zn 834.61; Be 0.48468; Sc n.a.; Sr 85.789; Ti 969.36; Tl 0.38774; W n.a.; Si n.a.; Fe 3611.5; Ca n.a.; Al 193.87; K n.a.; Mg n.a.; Na 1420.6; // Share of carbon in waste that is biogenic 0%. // Share of metals in waste not oxidised and bulk-recyclable (exclude very small or thin parts) Iron: 0%; Alu: 0%; Copper: 0%. // Recovery of metal scrap from bottom ash to recycling: 0g iron scrap, 0g aluminium scrap, 0g copper scrap. From this waste, the FLUWA process in the technology mix recovers 0.000515kg (DM) of a hydroxide sludge to be recycled in zinc furnaces. // Ultimately one kg of this waste produces 0.02837 kg of bottom ash (can include some washed ash) and 0.004609 kg of residues, which are landfilled (technology mix). Additional solidification of residues with 0.001843 kg of cement.Net energy production: 5.04MJ/kg electric energy and 9.72MJ/kg thermal energy. //

## Included activities start
waste incineration from waste reception gate and delivery into waste bunker at incinerator plant site (without transports to the incinerator)

## Included activities end
Waste-specific short-term emissions to water from leachate. Long-term emissions from landfill to ground water.

## Geography
Specific to the technology mix encountered in Switzerland in 2012.

## Technology
average Swiss MSWI plants in 2010 (grate incinerators) with electrostatic precipitator for fly ash (ESP), wet flue gas scrubber and 25% SNCR , 42.77% SCR-high dust , 32.68% SCR-low dust -DeNOx facilities and 0% without Denox (weighted according to mass of burnt waste, representing Swiss average). Efficiency of iron scrap separation from slag : 58%. Efficiency of non-ferrous scrap separation from slag : 31%. The technology mix for this dataset includes a filter ash treatment (FLUWA) of a share of 46.22%. Gross electric efficiency technology mix 15.84% and Gross thermal efficiency technology mix 28.51%

## Time period
Waste composition as given in literature reference, theoretical data or other source. Transfer coefficients for modern MSWI.

## Reference product
- electricity, for reuse in municipal waste incineration only: 1 kWh; name E_el_prod_MSWI; By-product classification allocatable product; CPC 17100: Electrical energy; lognormal variance with pedigree 0.03276, pedigree (1,1,1,1,1)
  Net electricity generated from this waste and used in internal MSWI plant energy redistribution.
  Uncertainty: uncertainty is calculated from uncertainties in waste composition and uncertainties in energy efficiency and the uncertainty in internal energy demand
  production volume 4.4066e7 kWh
    calculated in proportion to reference product waste input to incinerator
  property exergy 3.6 MJ; name E_el_prod_MSWI_exergy
    This exergy property is based on the exergy content of the product.
  property price 0.1 EUR2005
    Estimated to be the same price as in case of electricity, medium voltage.
  property true value relation 3.6; name E_el_prod_MSWI_true_value_relation
    property to calculate "true value" from
  properties: carbon allocation 0 kg, carbon content 0

## Inputs from technosphere
- 1,1-difluoroethane, HFC-152a: 1.7721e-5 kg
- acrylonitrile-butadiene-styrene copolymer: 8.61148e-5 kg
- air distribution terminal panel, steel, 120 m3/h: 2.66479e-10 unit
- air filter, decentralized unit, 180-250 m3/h: 2.66479e-10 unit
- air filter, in exhaust air valve: 3.99719e-10 unit
- aluminium, cast alloy: 0.000111251 kg
- aluminium, primary, ingot: 0.000125605, 2.28069e-5, 1.32429e-5 kg (3 suppliers, which the file names only by identifier); sum of these 0.000161655 kg
- aluminium, wrought alloy: 9.51983e-7 kg
- ammonia, anhydrous, liquid: 9.23882e-8, 9.68327e-9, 9.42991e-8, 3.55878e-7, 4.75932e-8, 4.32878e-8, 1.02406e-6, 3.0592e-8 kg (8 suppliers, which the file names only by identifier); sum of these 1.69779e-6 kg
- ammonium nitrate: 5.34903e-7, 4.11131e-7, 1.39567e-6 kg (3 suppliers, which the file names only by identifier); sum of these 2.3417e-6 kg
- ammonium sulfate: 8.61472e-7 kg
- application of plant protection product, by field sprayer: 3.49673e-8 ha
- blower and heat exchange unit, decentralized, 180-250 m3/h: 1.3324e-10 unit
- brass: 1.28395e-6, 6.45201e-9 kg (2 suppliers, which the file names only by identifier); sum of these 1.2904e-6 kg
- cable, connector for computer, without plugs: 0.000126631 m
- cable, printer cable, without plugs: 0.000126631 m
- cable, unspecified: 2.51472e-6 kg
- cast iron: 3.67229e-6 kg
- ceramic tile: 3.59403e-7 kg
- compressed air, 1000 kPa gauge: 1.04974e-5, 4.27161e-6 m3 (2 suppliers, which the file names only by identifier); sum of these 1.4769e-5 m3
- compressed air, 800 kPa gauge: 0.0009981, 0.000406147 m3 (2 suppliers, which the file names only by identifier); sum of these 0.00140425 m3
- concrete block: 7.78606e-7, 6.1471e-9, 1.35715e-8 kg (3 suppliers, which the file names only by identifier); sum of these 7.98325e-7 kg
- copper, cathode: 0.000381388 kg
- corrugated board box: 3.3842e-5, 7.85507e-5, 3.07324e-5, 1.26062e-6 kg (4 suppliers, which the file names only by identifier); sum of these 0.000144386 kg
- dimethyldichlorosilane: 2.46028e-7 kg
- electricity, high voltage: 0.00435799 kWh
- electricity, low voltage: 2.95839e-9, 1.06492e-5, 9.7706e-11, 1.84394e-6, 1.11453e-8, 2.5195e-10, 6.48513e-10, 1.18734e-9, 2.11041e-5, 7.19665e-10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 kWh (50 suppliers, which the file names only by identifier); sum of these 0.000415799 kWh
- electricity, medium voltage: 0.000117253 kWh
- electronic component, passive, unspecified: 0.000513589 kg
- energy and auxilliary inputs, metal working factory: 1.79249e-12, 3.99722e-13 kg (2 suppliers, which the file names only by identifier); sum of these 2.19222e-12 kg
- epoxy resin, liquid: 8.50103e-6, 1.79077e-6 kg (2 suppliers, which the file names only by identifier); sum of these 1.02918e-5 kg
- exhaust air outlet, steel/aluminium, 85x365 mm: 2.66479e-10 unit
- exhaust air valve, in-wall housing, plastic/steel, DN 125: 3.99719e-10 unit
- expanded perlite: 0.00011001 kg
- ferrite: 1.50198e-6 kg
- flat glass factory: 1.8751e-12 unit
- flat glass, coated: 2.01987e-6, 4.08998e-6 kg (2 suppliers, which the file names only by identifier); sum of these 6.10984e-6 kg
- flat glass, uncoated: 0.000272321, 0.00132242 kg (2 suppliers, which the file names only by identifier); sum of these 0.00159474 kg
- flexible duct, aluminium/PET, DN of 125: 2.22066e-10 m
- formaldehyde: 2.62606e-7, 1.09798e-6 kg (2 suppliers, which the file names only by identifier); sum of these 1.36058e-6 kg
- gold: 8.04633e-11 kg
- greenhouse, plastic walls and roof: 0.000174837 m2*year
- heat, central or small-scale, natural gas: 0.00101748 MJ
- heat, central or small-scale, other than natural gas: 0.000339018 MJ
- heat, district or industrial, natural gas: 0.000777512 MJ
- heat, district or industrial, other than natural gas: 7.68787e-5 MJ
- inert waste: -2.55373e-7, -2.19944e-9, -9.00155e-7 kg (3 suppliers, which the file names only by identifier); sum of these -1.15773e-6 kg
- injection moulding: 0.000201716 kg
- inorganic nitrogen fertiliser, as N: 7.15291e-7, 1.48892e-9, 6.73685e-8, 4.13356e-10, 1.84618e-7, 8.18276e-9, 1.28351e-8, 6.85411e-9, 9.05165e-10, 2.88801e-8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 kg (63 suppliers, which the file names only by identifier); sum of these 8.48391e-6 kg
- inorganic phosphorus fertiliser, as P2O5: 8.56061e-10, 4.59381e-6, 1.86777e-8, 7.83102e-9, 6.66794e-7, 2.6071e-8, 8.51197e-9, 7.49054e-10, 8.75517e-10, 2.01369e-9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 kg (63 suppliers, which the file names only by identifier); sum of these 8.64817e-6 kg
- inorganic potassium fertiliser, as K2O: 1.44203e-6, 1.65071e-8, 1.24143e-8, 8.64774e-9, 1.97592e-8, 1.37723e-7, 4.53329e-9, 4.96346e-7, 1.16363e-7, 1.0939e-7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 kg (63 suppliers, which the file names only by identifier); sum of these 1.78718e-5 kg
- irrigation: 2.09613e-6, 1.41272e-7, 8.4747e-8, 2.12533e-9, 3.78778e-7, 1.11899e-5, 1.25176e-6, 2.15034e-5, 8.26379e-8, 4.96617e-6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 m3 (16 suppliers, which the file names only by identifier); sum of these 8.30124e-5 m3
- kraft paper: 4.61309e-6, 5.7602e-7 kg (2 suppliers, which the file names only by identifier); sum of these 5.18911e-6 kg
- lead: 6.43706e-9 kg
- lithium fluoride: 2.46028e-7 kg
- magnesium: 5.44513e-6 kg
- magnesium-alloy, AZ91, diecast: 5.44513e-6 kg
- metal working factory: 2.19222e-12 unit
- methylcyclopentane: 3.54421e-5 kg
- nickel, class 1: 3.21853e-9 kg
- nylon 6: 4.10836e-7, 2.02895e-7 kg (2 suppliers, which the file names only by identifier); sum of these 6.13731e-7 kg
- packaging film, low density polyethylene: 8.11598e-6 kg
- packaging, for fertilisers: 0.000100817 kg
- packaging, for pesticides: 0.00022115 kg
- palladium: 3.21853e-11 kg
- paper, woodcontaining, lightweight coated: 0.0013703, 0.00401834 kg (2 suppliers, which the file names only by identifier); sum of these 0.00538864 kg
- pesticide, unspecified: 5.64722e-7 kg
- phenyl isocyanate: 0.000478469 kg
- phosphate rock, beneficiated: 6.04616e-7, 8.02678e-9, 8.02678e-9 kg (3 suppliers, which the file names only by identifier); sum of these 6.2067e-7 kg
- photovoltaic cell factory: 9.37983e-13 unit
- planting: 1.74837e-8 ha
- plastic processing factory: 1.94995e-13 unit
- plug, inlet and outlet, for computer cable: 7.03505e-5 unit
- plug, inlet and outlet, for printer cable: 7.03505e-5 unit
- polyethylene pipe, corrugated, DN 75: 8.88264e-9 m
- polyethylene, high density, granulate: 1.93112e-5 kg
- polyethylene, low density, granulate: 3.44232e-5 kg
- polyol: 0.000117189, 0.000237292 kg (2 suppliers, which the file names only by identifier); sum of these 0.00035448 kg
- polypropylene, granulate: 9.60593e-5 kg
- polystyrene foam slab: 1.83474e-5 kg
- polystyrene, expandable: 4.45542e-6 kg
- polystyrene, general purpose: 0.000254666 kg
- polystyrene, high impact: 0.000953878 kg
- polyvinylchloride, bulk polymerised: 2.43427e-5 kg
- polyvinylchloride, suspension polymerised: 0.00014427 kg
- potassium chloride: 1.255e-5 kg
- potassium sulfate: 2.79327e-6 kg
- printed paper: 5.98744e-7 kg
- printer, laser, black/white: 1.12263e-6 unit
- room-connecting overflow element, steel, approx. 40 m3/h: 3.99719e-10 unit
- scrap aluminium: -8.64256e-5, -4.05489e-6, -0.000181977 kg (3 suppliers, which the file names only by identifier); sum of these -0.000272457 kg
- scrap copper: -5.47741e-6, -0.000116745, -0.000245816 kg (3 suppliers, which the file names only by identifier); sum of these -0.000368039 kg
- scrap steel: -9.08408e-7, -0.00222669, -0.000716996 kg (3 suppliers, which the file names only by identifier); sum of these -0.0029446 kg
- seal, natural rubber based: 3.99162e-8 kg
- sealing tape, aluminium/PE, 50 mm wide: 4.44132e-9 m
- section bar extrusion, aluminium: 1.39997e-6 kg
- sheet rolling, copper: 3.63008e-6 kg
- sheet rolling, steel: 8.43502e-6 kg
- silencer, steel, DN 125: 5.32958e-10 unit
- silver: 3.21853e-10 kg
- sodium hydroxide, without water, in 50% solution state: 8.196e-8 kg
- sodium percarbonate, powder: 8.13348e-8, 1.64693e-7 kg (2 suppliers, which the file names only by identifier); sum of these 2.46028e-7 kg
- sodium silicate, solid: 1.08479e-7, 2.19656e-7 kg (2 suppliers, which the file names only by identifier); sum of these 3.28135e-7 kg
- spiral-seam duct, steel, DN 125: 2.66479e-10 m
- steam, in chemical industry: 8.68895e-5, 0.000492816 kg (2 suppliers, which the file names only by identifier); sum of these 0.000579705 kg
- steel, chromium steel 18/8, hot rolled: 9.04707e-5 kg
- steel, low-alloyed: 0.0027432 kg
- steel, low-alloyed, hot rolled: 0.000206484 kg
- stretch blow moulding: 4.40394e-6 kg
- supply air inlet, steel/SS, DN 75: 6.66198e-10 unit
- synthetic rubber: 4.71562e-6 kg
- tap water: 0.00266798 kg
- tin: 9.65559e-9 kg
- tomato seedling, for planting: 0.000489542 unit
- toner module, laser printer, black/white: 0.000250721 unit
- toner module, laser printer, colour: 3.51752e-5 unit
- transport, tractor and trailer, agricultural: 3.06309e-6, 1.2456e-8 metric ton*km (2 suppliers, which the file names only by identifier); sum of these 3.07555e-6 metric ton*km
- trisodium phosphate: 2.07724e-6 kg
- urea: 2.58607e-6, 3.27066e-7, 2.20832e-6 kg (3 suppliers, which the file names only by identifier); sum of these 5.12146e-6 kg
- used air distribution terminal panel steel, 120 m3/h: -2.66479e-10 unit
- used air filter decentralized unit, 180-250 m3/h: -2.66479e-10 unit
- used air filter in exhaust air valve: -3.99719e-10 unit
- used blower and heat exchange unit decentralized, 180-250 m3/h: -1.3324e-10 unit
- used cable: -2.51472e-6 kg
- used exhaust air valve in-wall housing, plastic/steel: -3.99719e-10 unit
- used flexible duct aluminium/PET, DN of 125: -2.22066e-10 m
- used printer, laser: -0.000412957 kg
- used room-connecting overflow element steel, approx. 40 m3/h: -3.99719e-10 unit
- used sealing tape aluminium/PE, 50 mm wide: -4.44132e-9 m
- used silencer steel, DN 125: -5.32958e-10 unit
- used toner module, laser printer, black/white: -0.00018968 kg
- used ventilation control and wiring decentralized unit: -1.3324e-10 unit
- ventilation control and wiring, decentralized unit: 1.3324e-10 unit
- vinyl acetate: 2.45497e-5 kg
- waste bulk iron, excluding reinforcement: -2.64259e-9 kg
- waste electric and electronic equipment: -0.000513589 kg
- waste glass: -3.01709e-9, -5.10992e-6, -5.42927e-8, -1.05553e-8, -1.98106e-7, -1.224e-5, -1.58228e-7, -0.000132801, -1.12371e-6, -2.04806e-7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 kg (43 suppliers, which the file names only by identifier); sum of these -0.00165576 kg
- waste packaging paper: -3.27569e-6, -1.33709e-7, -2.05008e-7, -6.38789e-16, -7.4078e-7, -1.34251e-6, -1.79261e-8, -7.22322e-8 kg (8 suppliers, which the file names only by identifier); sum of these -5.78786e-6 kg
- waste paperboard: -3.51021e-7, -2.28941e-7, -4.2702e-5, -2.2987e-6, -5.64529e-6, -1.23678e-7, -1.26839e-6, -3.06936e-8 kg (8 suppliers, which the file names only by identifier); sum of these -5.26487e-5 kg
- waste plastic, mixture: -9.42042e-6, -4.76032e-8, -1.05029e-7, -8.16452e-6, -6.59482e-5, -6.29436e-7, -2.46875e-7, -2.5998e-7 kg (8 suppliers, which the file names only by identifier); sum of these -8.4822e-5 kg
- waste polyethylene: -8.61196e-6, -4.06711e-9, -2.92034e-10, -3.2441e-11, -2.12113e-10, -8.23926e-10, -1.55924e-10, -8.14183e-10, -2.91632e-9, -9.22097e-9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 kg (43 suppliers, which the file names only by identifier); sum of these -7.75354e-5 kg
- waste polyethylene/polypropylene product: -2.93127e-9 kg
- waste polypropylene: -1.18943e-7, -9.24616e-6, -5.39098e-8, -7.4685e-5, -2.94422e-7, -7.12825e-7, -2.79581e-7, -1.06684e-5 kg (8 suppliers, which the file names only by identifier); sum of these -9.60593e-5 kg
- waste polystyrene: -3.00175e-6, -4.77766e-9, -1.28031e-10, -0.000801864, -1.60512e-8, -3.21324e-9, -7.20085e-10, -1.27705e-6, -1.57351e-9, -1.18364e-9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 kg (43 suppliers, which the file names only by identifier); sum of these -0.00103132 kg
- waste polyvinylchloride: -9.96059e-8, -5.16566e-7, -2.19764e-7, -5.43986e-7, -1.31704e-6, -1.97115e-5, -1.70836e-5, -0.000137991 kg (8 suppliers, which the file names only by identifier); sum of these -0.000177483 kg
- waste rubber, unspecified: -7.30346e-8, -1.73976e-6, -1.73976e-6 kg (3 suppliers, which the file names only by identifier); sum of these -3.55255e-6 kg
- wastewater, average: -2.39878e-8, -1.42119e-8, -3.99168e-6, -9.54491e-7 m3 (4 suppliers, which the file names only by identifier); sum of these -4.98437e-6 m3
- wastewater, unpolluted: -1.60482e-8, -3.31856e-6 m3 (2 suppliers, which the file names only by identifier); sum of these -3.33461e-6 m3
- wire drawing, copper: 1.10098e-5 kg
- zinc: 3.21853e-9 kg

## Inputs from nature
- Carbon dioxide, in air [natural resource, in air]: 0.000290001 kg
- Energy, gross calorific value, in biomass [natural resource, biotic]: 0.00260681 MJ
- Occupation, annual crop [natural resource, land]: 0.000175309 m2*year
- Transformation, from arable land, unspecified use [natural resource, land]: 0.000174837 m2
- Transformation, to arable land, unspecified use [natural resource, land]: 0.000174837 m2
- Water, unspecified natural origin [natural resource, in water]: 4.06108e-6 m3
- Water, well, in ground [natural resource, in water]: 1.59696e-6 m3

## Emissions to nature
- Ammonia [air, non-urban air or from high stacks]: 1.42716e-6 kg
- Benzene [air, unspecified]: 9.94851e-10 kg
- Carbon dioxide, fossil [air, non-urban air or from high stacks]: 5.62589e-6 kg
- Carbon dioxide, from soil or biomass stock [air, non-urban air or from high stacks]: 2.36711e-5 kg
- Dinitrogen monoxide [air, non-urban air or from high stacks]: 2.534e-7 kg
- Ethane, 1,1-difluoro-, HFC-152a [air, urban air close to ground]: 1.7721e-5 kg
- Nitrogen oxides [air, non-urban air or from high stacks]: 5.50106e-7 kg
- Water [air, non-urban air or from high stacks]: 7.46552e-5 m3
- Water [air, unspecified]: 2.0384e-7 m3
- Cadmium II [soil, agricultural]: 5.45695e-10 kg
- Chromium III [soil, agricultural]: 8.25005e-9 kg
- Copper ion [soil, agricultural]: 5.91893e-10 kg
- Fungicides, unspecified [soil, agricultural]: 4.98284e-7 kg
- Insecticides, unspecified [soil, agricultural]: 6.64379e-8 kg
- Lead II [soil, agricultural]: 9.85077e-10 kg
- Mercury II [soil, agricultural]: 5.92332e-12 kg
- Nickel II [soil, agricultural]: 1.16002e-9 kg
- Zinc II [soil, agricultural]: 5.92787e-9 kg
- Cadmium II [water, ground-]: 8.57923e-13 kg
- Chromium III [water, ground-]: 3.68958e-10 kg
- Copper ion [water, ground-]: 6.15949e-11 kg
- Lead II [water, ground-]: 8.0722e-12 kg
- Mercury II [water, ground-]: 2.12846e-14 kg
- Nitrate [water, ground-]: 6.27663e-6 kg
- Phosphate [water, ground-]: 3.76073e-9 kg
- Phosphate [water, surface water]: 2.12951e-8 kg
- Water [water, ground-]: 1.66025e-6 m3
- Water [water, surface water]: 6.64099e-6 m3
- Zinc II [water, ground-]: 5.08634e-10 kg
