# composting facility construction, open

Dataset: EcoSpold 2, unit process
Geography: CH
Time period: 1999-01-01 to 2022-12-31
Technology level: current
Classification: ISIC rev.4 ecoinvent: 4290:Construction of other civil engineering projects
Classification: EcoSpold01Categories: agricultural means of production/buildings
Tags: ConvertedDataset
Scenario: Business-as-Usual
System model: Allocation at the point of substitution
Generated by: Angelika Heil
Published in: Nemecek, T. 2007
Database: ecoinvent
isCopyrightProtected: true

## General comment
The inventory refers to a compost plant over the lifetime of 25 years. The compost plant is constructed for a treating capactiy of 10‘000 tons biogenic waste per year. The total turnover of the plant over the entire lifetime of 25 years amounts thus 250‘000 tons biogenic waste.
[This dataset was already contained in the ecoinvent database version 2. It was not individually updated during the transfer to ecoinvent version 3. Life Cycle Impact Assessment results may still have changed, as they are affected by changes in the supply chain, i.e. in other datasets. This dataset was generated following the ecoinvent quality guidelines for version 2. It may have been subject to central changes described in the ecoinvent version 3 change report (http://www.ecoinvent.org/database/ecoinvent-version-3/reports-of-changes/), and the results of the central updates were reviewed extensively. The changes added e.g. consistent water flows and other information throughout the database. The documentation of this dataset can be found in the ecoinvent reports of version 2, which are still available via the ecoinvent website. The change report linked above covers all central changes that were made during the conversion process.]

## Included activities end
Building materials required for a compost plant and its construction as well as the disposal of these materials were included. Land use during construction and use is considered. The lifetime of the plant was assumed as 25 years. Transport of the building materials to the construction site were included.

## Geography
Values refer to the situtation in Switzerland.

## Technology
Refer to open plant composting.

## Time period
Year when reference used for this inventory was published.

## Reference product
- composting facility, open: 1 unit; By-product classification allocatable product; CPC 53290: Other civil engineering works
  EcoSpold01Location=CH
  production volume 0.0336675 unit
    This is a placeholder value that does not reflect real-world production volumes. This dataset does not currently require a real-world production volume to work in the database framework, and no actual data were collected yet. This has no negative effect on the results of the ecoinvent database. The placeholder value of this activity was scaled according to the nominal GDP of 2005 (source: United Nations, http://data.un.org/Glossary.aspx?q=GDP+%28current+US%24%29, accessed 20130726) to reflect an appropriate share of the global production volume, which is also a placeholder value.
  property price 4.33458e6 EUR2005
    Convert from EU 27 price to the world by currency exchange rate.
  properties: carbon allocation 0 kg, carbon content 0

## Inputs from technosphere
- cast iron: 50000 kg; lognormal variance with pedigree 0.0512, pedigree (2,3,5,1,1)
  EcoSpold01Location=RER
  properties: carbon content, fossil 0.04, dry mass 1 kg, wet mass 1 kg
  note on carbon content, fossil: Cast iron is made by remelting pig iron in small furnaces (e.g. cupola furnaces or electric arc furnaces) and poured into moulds to make castings. It usually contains 2% to 6% carbon (ecoinvent v2.2 report 10_partII). An average content of 4% was considered
- concrete, 30MPa: 367 m3; lognormal variance with pedigree 0.0512, pedigree (2,3,5,1,1)
  EcoSpold01Location=CH
  properties: dry mass 2205 kg, water content 0.0816327, wet mass 2385 kg
- copper, cathode: 375 kg; lognormal variance with pedigree 0.0512, pedigree (2,3,5,1,1)
  EcoSpold01Location=RER
  properties: dry mass 1 kg, wet mass 1 kg
- glued laminated timber, MUF-glue: 139 m3; lognormal variance with pedigree 0.0512, pedigree (2,3,5,1,1)
  EcoSpold01Location=RER
  The split between PUR-glue and MUF-glue glued laminated timber is made based on the Swiss relative production volumes for the products.
  properties: carbon content, fossil 0.01638, carbon content, non-fossil 0.442689, dry mass 403.64 kg, heating value, net 5517.96 MJ, price 298 EUR2005, water content 0.0975126, wet mass 443 kg
- glued laminated timber, PUR-glue: 139 m3; lognormal variance with pedigree 0.0512, pedigree (2,3,5,1,1)
  The split between PUR-glue and MUF-glue glued laminated timber is made based on the Swiss relative production volumes for the products.
  properties: carbon content, fossil 0.00801, carbon content, non-fossil 0.446904, dry mass 399.46 kg, heating value, net 5409.08 MJ, price 298 EUR2005, water content 0.0989836, wet mass 439 kg
- gravel, crushed: 2.16e7 kg; lognormal variance with pedigree 0.0512, pedigree (2,3,5,1,1)
  EcoSpold01Location=CH
  properties: dry mass 1 kg, wet mass 1 kg
- inert waste, for final disposal: -2.16e7 kg; lognormal variance with pedigree 0.0112, pedigree (2,3,1,1,1)
  EcoSpold01Location=CH
  production volume
    Calculated from the production volume of composting facility, open in proportion to the respective output amounts.
  properties: dry mass 0.995 kg, water content 0.00502513, wet mass 1 kg
- pitch: 122000 kg; lognormal variance with pedigree 0.0512, pedigree (2,3,5,1,1)
  EcoSpold01Location=CH
  properties: carbon content, fossil 0.83, dry mass 1 kg, heating value, net 28 MJ, wet mass 1 kg
- reinforcing steel: 21200 kg; lognormal variance with pedigree 0.0512, pedigree (2,3,5,1,1)
  EcoSpold01Location=RER
  properties: carbon content, fossil 0.004, dry mass 1 kg, wet mass 1 kg
- sand: 1.17e6 kg; lognormal variance with pedigree 0.0512, pedigree (2,3,5,1,1)
  EcoSpold01Location=CH
  properties: dry mass 1 kg, wet mass 1 kg
- steel, low-alloyed, hot rolled: 37500 kg; lognormal variance with pedigree 0.0512, pedigree (2,3,5,1,1)
  EcoSpold01Location=RER
  properties: carbon content, fossil 0.005, dry mass 1 kg, wet mass 1 kg
  note on carbon content, fossil: Low alloyed steel composition given in Tab. 3.2 ecoinvent v2.2 report 10_partII. Steel assumed to have a C content of 0.5%
- waste building wood, chrome preserved: -125000 kg; lognormal variance with pedigree 0.0112, pedigree (2,3,1,1,1)
  EcoSpold01Location=CH
  production volume
    (same comment as for inert waste, for final disposal)
  properties: carbon content, non-fossil 0.484262, dry mass 0.8 kg, heating value, net 11.63 MJ, water content 0.25, wet mass 1 kg
  note on carbon content, non-fossil: C content per kg DM was calculated using information in Tab A.4, ecoinvent v2.2 report 13_I
- waste concrete, not reinforced: -807000 kg; lognormal variance with pedigree 0.0112, pedigree (2,3,1,1,1)
  EcoSpold01Location=CH
  production volume
    (same comment as for inert waste, for final disposal)
  properties: dry mass 1 kg, wet mass 1 kg
- waste reinforcement steel: -21200 kg; lognormal variance with pedigree 0.0112, pedigree (2,3,1,1,1)
  EcoSpold01Location=CH
  production volume
    (same comment as for inert waste, for final disposal)
  properties: dry mass 1 kg, wet mass 1 kg

## Inputs from nature
- Occupation, construction site [natural resource, land]: 750 m2*year; lognormal variance with pedigree 0.0912, pedigree (2,3,5,1,1)
- Occupation, industrial area [natural resource, land]: 18800 m2*year; lognormal variance with pedigree 0.0912, pedigree (2,3,5,1,1)
- Transformation, from unspecified [natural resource, land]: 750 m2; lognormal variance with pedigree 0.1712, pedigree (2,3,5,1,1)
- Transformation, to industrial area [natural resource, land]: 750 m2; lognormal variance with pedigree 0.1712, pedigree (2,3,5,1,1)

## Sampling procedure
Data come from one compost plant in Switzerland.

## Review by Maggie Osses 2003-09-12
Passed.
