# diesel, burned in fishing vessel

Dataset: EcoSpold 2, unit process
Geography: GLO
Time period: 2016-01-01 to 2022-12-31
Technology level: current
Classification: EcoSpold01Categories: oil/fuels
Classification: ISIC rev.4 ecoinvent: 0311:Marine fishing
Scenario: Business-as-Usual
System model: Allocation at the point of substitution
Generated by: Ian Vázquez-Rowe
Published in: Avadí, A. 2018
Database: ecoinvent
isCopyrightProtected: true

## General comment
This process describes the consumption of diesel in fishing vessels. The process includes the combustion of diesel in marine engines. Tier 1 emission factors for fishing vessels using marine diesel oil/marine gas oil were retained, following the EMEP/Corinair 2013 guidance of the European Union.
System boundaries of fishing systems

## Included activities start
Provision and consumption of diesel.

## Included activities end
Diesel consumption and emissions from fuels combusted for inland, coastal and deep-sea fishing. The emission factors for POPs (Persistent Organic Compounds) are highly uncertain as they are based on a very limited data set. Only HCB were included in the datset. Infrastructure (marine engine) and its maintenance are excluded.

## Geography
Data from reference guideline, global

## Technology
Emissions from fuels combusted for inland, coastal and deep-sea fishing.

## Parameters
- emission of lead from diesel combustion in fishing vessels: 1.3e-7 kg/kg; name lead
  Emission factor from the EMEP/EEA (2013) Air pollutant emission inventory guidebook, Available at http://www.eea.europa.eu//publications/emep-eeaguidebook-2013
- emission of non-methane volatile organic compounds: 0.0028 kg/kg; name NMVOC
  (same comment as for emission of lead from diesel combustion in fishing vessels)
- emissions of arsenic from diesel combustion in fishing vessels: 4e-8 dimensionless; name As
  (same comment as for emission of lead from diesel combustion in fishing vessels)
- emissions of benzene, hexachloro from diesel combustion in fishing vessels: 8e-8 kg/kg; name benzene
  (same comment as for emission of lead from diesel combustion in fishing vessels)
- emissions of cadmium from diesel combustion in fishing vessels: 1e-8 kg/kg; name Cd
  (same comment as for emission of lead from diesel combustion in fishing vessels)
- emissions of carbon dioxide from diesel combustion in fishing vessels: 3.17 kg/kg; name CO2
  (same comment as for emission of lead from diesel combustion in fishing vessels)
- emissions of carbon monoxide from diesel combustion in fishing vessels: 0.0074 dimensionless; name CO
  (same comment as for emission of lead from diesel combustion in fishing vessels)
- emissions of chromium from diesel combustion in fishing vessels: 5e-8 kg/kg; name Cr
  (same comment as for emission of lead from diesel combustion in fishing vessels)
- emissions of copper from diesel combustion in fishing vessels: 8.8e-7 kg/kg; name Cu
  (same comment as for emission of lead from diesel combustion in fishing vessels)
- emissions of mercury from diesel combustion in fishing vessels: 3e-8 kg/kg; name Hg
  (same comment as for emission of lead from diesel combustion in fishing vessels)
- emissions of nickel from diesel combustion in fishing vessels: 1e-6 kg/kg; name Ni
  (same comment as for emission of lead from diesel combustion in fishing vessels)
- emissions of nitrogen oxides from diesel combustion in fishing vessels: 0.0785 kg/kg; name NOx
  (same comment as for emission of lead from diesel combustion in fishing vessels)
- emissions of particulate matter <10: 0.0015 kg/kg; name PM10
  (same comment as for emission of lead from diesel combustion in fishing vessels)
- emissions of particulate matter <2.5 from diesel combustion in fishing vessels: 0.0014 kg/kg; name PM2_5
  (same comment as for emission of lead from diesel combustion in fishing vessels)
- emissions of polychlorinated biphenyls from diesel combustion in fishing vessels: 3.8e-5 kg/kg; name biphenyls
  (same comment as for emission of lead from diesel combustion in fishing vessels)
- emissions of selenium from diesel combustion in fishing vessels: 1e-7 kg/kg; name Se
  (same comment as for emission of lead from diesel combustion in fishing vessels)
- emissions of zinc from diesel combustion in fishing vessels: 1.2e-6 kg/kg; name Zn
  (same comment as for emission of lead from diesel combustion in fishing vessels)
- net calorific value: 42.7 MJ/kg; name net_cal_value
  Net Calorific Value for marine diesel, from http://www.effship.com/PartnerArea/MiscPresentations/Dr_Wild_Report.pdf

## Reference product
- diesel, burned in fishing vessel: 1 MJ; source EEA 2013; By-product classification allocatable product; CPC 4312: Internal combustion engines of a kind used for motor vehicles
  production volume 1.04215e9 MJ
    50 billion liters of fuel to power fisheries worldwide. A desnity for diesel of 890 kg/m3 was assumed.
  property price 0.00936768 EUR2005
    Calculated based on the price of diesel and the relative input of diesel to this activity.
  properties: carbon allocation 0 kg, carbon content 0

## Inputs from technosphere
- diesel: 0.0234192 kg; = 1/net_cal_value; source EEA 2013; lognormal variance with pedigree 0.0266, pedigree (1,5,4,5,3)
  Amount of diesel required to produce 1 MJ of energy
  properties: carbon content, fossil 0.865, dry mass 1 kg, heating value, net 42.8 MJ, wet mass 1 kg
  note on carbon content, fossil: C-content of diesel is 86.5% (ecoinvent v2.2 report 6_IV, Tab 3.14)

## Emissions to nature
All rows: source EEA 2013
- Arsenic ion [air, unspecified]: 9.36768e-10 kg; = diesel* As; lognormal variance with pedigree 0.682025, pedigree (4,5,4,2,3)
  Calculated from the amount of diesel required to produce 1 MJ and teh corresponding emission factor from the EMEP/EEA (2013) Air pollutant emission inventory guidebook, Available at http://www.eea.europa.eu//publications/emep-eeaguidebook-2013
- Benzene, hexachloro- [air, unspecified]: 1.87354e-9 kg; = diesel* benzene; lognormal variance with pedigree 0.032625, pedigree (4,5,4,2,3)
  (same comment as for Arsenic ion)
- Cadmium II [air, unspecified]: 2.34192e-10 kg; = diesel* Cd; lognormal variance with pedigree 0.682025, pedigree (4,5,4,2,3)
  (same comment as for Arsenic ion)
- Carbon dioxide, fossil [air, unspecified]: 0.0742389 kg; = diesel* CO2; lognormal variance with pedigree 0.032625, pedigree (4,5,4,2,3)
  (same comment as for Arsenic ion)
- Carbon monoxide, fossil [air, unspecified]: 0.000173302 kg; = diesel* CO; lognormal variance with pedigree 0.682025, pedigree (4,5,4,2,3)
  (same comment as for Arsenic ion)
- Chromium III [air, unspecified]: 1.17096e-9 kg; = diesel* Cr; lognormal variance with pedigree 0.682025, pedigree (4,5,4,2,3)
  (same comment as for Arsenic ion)
- Copper ion [air, unspecified]: 2.06089e-8 kg; = diesel* Cu; lognormal variance with pedigree 0.682025, pedigree (4,5,4,2,3)
  (same comment as for Arsenic ion)
- Lead II [air, unspecified]: 3.0445e-9 kg; = diesel* lead; lognormal variance with pedigree 0.682025, pedigree (4,5,4,2,3)
  (same comment as for Arsenic ion)
- Mercury II [air, unspecified]: 7.02576e-10 kg; = diesel* Hg; lognormal variance with pedigree 0.682025, pedigree (4,5,4,2,3)
  (same comment as for Arsenic ion)
- NMVOC, non-methane volatile organic compounds [air, unspecified]: 6.55738e-5 kg; = diesel* NMVOC; lognormal variance with pedigree 0.072025, pedigree (4,5,4,2,3)
  (same comment as for Arsenic ion)
- Nickel II [air, unspecified]: 2.34192e-8 kg; = diesel* Ni; lognormal variance with pedigree 0.682025, pedigree (4,5,4,2,3)
  (same comment as for Arsenic ion)
- Nitrogen oxides [air, unspecified]: 0.00183841 kg; = diesel* NOx; lognormal variance with pedigree 0.072025, pedigree (4,5,4,2,3)
  (same comment as for Arsenic ion)
- Particulate Matter, < 2.5 um [air, unspecified]: 3.27869e-5 kg; = diesel* PM2_5; lognormal variance with pedigree 0.332025, pedigree (4,5,4,2,3)
  (same comment as for Arsenic ion)
- Particulate Matter, > 2.5 um and < 10um [air, unspecified]: 3.51288e-5 kg; = diesel* PM10; lognormal variance with pedigree 0.072025, pedigree (4,5,4,2,3)
  (same comment as for Arsenic ion)
- Polychlorinated biphenyls [air, unspecified]: 8.8993e-7 kg; = diesel* biphenyls; lognormal variance with pedigree 0.032625, pedigree (4,5,4,2,3)
  (same comment as for Arsenic ion)
- Selenium IV [air, unspecified]: 2.34192e-9 kg; = diesel* Se; lognormal variance with pedigree 0.682025, pedigree (4,5,4,2,3)
  (same comment as for Arsenic ion)
- Sulfur dioxide [air, unspecified]: 0.000702576 kg; = diesel*1.5*0.02; lognormal variance with pedigree 0.032625, pedigree (4,5,4,2,3)
  (same comment as for Arsenic ion)
- Sulfur oxides [air, unspecified]: 0.000468384 kg; = diesel*0.02; lognormal variance with pedigree 0.032625, pedigree (4,5,4,2,3)
  (same comment as for Arsenic ion)
- Zinc II [air, unspecified]: 2.8103e-8 kg; = diesel* Zn; lognormal variance with pedigree 0.682025, pedigree (4,5,4,2,3)
  (same comment as for Arsenic ion)

## Extrapolations
Extrapolation is performed by assuming that emissions standards for fishing vessels in Latin America are similar to those in Europe
