# harvester production

Dataset: EcoSpold 2, unit process
Geography: CH
Time period: 1995-01-01 to 2022-12-31
Technology level: current
Classification: EcoSpold01Categories: agricultural means of production/machinery
Classification: ISIC rev.4 ecoinvent: 2821:Manufacture of agricultural and forestry machinery
Tags: ConvertedDataset
Scenario: Business-as-Usual
System model: Allocation at the point of substitution
Generated by: Albert Zimmermann
Published in: Nemecek, T. 2007
Database: ecoinvent
isCopyrightProtected: true

## General comment
This dataset represents the production of harversters. Representatives of this class are for example: combine-harvester. Calculations are based on a 10000 kg harvesters, with a useful life of 1300 hours and a repair factor of 0.55. For exact results, module should only be used if lifetime and repair factor of the balanced machinery are within a narrow range of the values the module is based on. The functional unit is 1kg harvester during its lifetime.
[This dataset was already contained in the ecoinvent database version 2. It was not individually updated during the transfer to ecoinvent version 3. Life Cycle Impact Assessment results may still have changed, as they are affected by changes in the supply chain, i.e. in other datasets. This dataset was generated following the ecoinvent quality guidelines for version 2. It may have been subject to central changes described in the ecoinvent version 3 change report (http://www.ecoinvent.org/database/ecoinvent-version-3/reports-of-changes/), and the results of the central updates were reviewed extensively. The changes added e.g. consistent water flows and other information throughout the database. The documentation of this dataset can be found in the ecoinvent reports of version 2, which are still available via the ecoinvent website. The change report linked above covers all central changes that were made during the conversion process.]

## Included activities start
From reception of the materials and energy resources at the factory gate.

## Included activities end
This activity ends with the disposal of the agricultural machinery.The dataset includes the use of resources and the amount of emissions during the production, the maintenance and repair and the disposal of the harvester. The dataset doesn't include the impacts caused by fuel consumption during operation-time of the machinery, and the amount of emission from the tyre abrasion during this time. No data was available about buildings needed for manufacture and maintenance of the machinery.

## Geography
The inventories apply to the production in Western Europe and transportation to Switzerland.

## Technology
Approximate figures for this representative type of agricultural machinery in operation in 1996 (for some representatives, in 1990) in Switzerland. Values are based and adapted on a different technology (lorries-manufacture).

## Time period
Considered references range from start- to end-date

## Reference product
- harvester: 1 kg; By-product classification allocatable product; CPC 441: Agricultural or forestry machinery and parts thereof
  EcoSpold01Location=CH
  production volume 1.6821e6 kg
    Calculated from area with 'combine harvesting' at 6.3 kg harvester per hectar
  properties: carbon allocation 0 kg, carbon content 0, price 6.54 EUR2005

## Inputs from technosphere
- alkyd paint, white, without solvent, in 60% solution state: 0.00698779 kg; lognormal variance with pedigree 0.058125, pedigree (4,2,5,2,1)
  Proxy, based on "Agricultural Machinery" - pdf-document on the dedicated talk page of ecoinvent (www.ecoinvent.org/talk-pages)
  EcoSpold01Location=RER
  properties: carbon content, fossil 0.140367, carbon content, non-fossil 0.199629, dry mass 1 kg, heating value, net 10.3 MJ, wet mass 1 kg
  note on carbon content, fossil: C content was calculated as an addition of C content in the raw materials.
- aluminium, cast alloy: 0.0188471 kg; lognormal variance with pedigree 0.058125, pedigree (4,2,5,2,1)
  EcoSpold01Location=RER
  Proxy, based on "Agricultural Machinery" - pdf-document on the dedicated talk page of ecoinvent (www.ecoinvent.org/talk-pages)
  properties: dry mass 1 kg, wet mass 1 kg
- aluminium, wrought alloy: 0.04005 kg; lognormal variance with pedigree 0.058125, pedigree (4,2,5,2,1)
  (same comment as for alkyd paint, white, without solvent, in 60% solution state)
  properties: dry mass 1 kg, wet mass 1 kg
- copper, cathode: 0.0259547 kg; lognormal variance with pedigree 0.058125, pedigree (4,2,5,2,1)
  (same comment as for alkyd paint, white, without solvent, in 60% solution state)
  properties: dry mass 1 kg, wet mass 1 kg
- electricity, medium voltage: 2.22611 kWh; lognormal variance with pedigree 0.062025, pedigree (3,4,5,2,3)
  Proxy, based on "Agricultural Machinery" - pdf-document on the dedicated talk page of ecoinvent (www.ecoinvent.org/talk-pages)
  EcoSpold01Location=CH
- flat glass, uncoated: 0.0129773 kg; lognormal variance with pedigree 0.058125, pedigree (4,2,5,2,1)
  (same comment as for alkyd paint, white, without solvent, in 60% solution state)
  properties: dry mass 1 kg, wet mass 1 kg
- heat, central or small-scale, other than natural gas: 7.81654 MJ; lognormal variance with pedigree 0.062025, pedigree (3,4,5,2,3)
  EcoSpold01Location=CH
  Proxy, based on "Agricultural Machinery" - pdf-document on the dedicated talk page of ecoinvent (www.ecoinvent.org/talk-pages)
  properties: heating value, net 1 MJ
- heat, district or industrial, natural gas: 4.66585 MJ; lognormal variance with pedigree 0.062025, pedigree (3,4,5,2,3)
  (same comment as for aluminium, cast alloy)
  properties: heating value, net 1 MJ
- heat, district or industrial, other than natural gas: 0.670828 MJ; lognormal variance with pedigree 0.062025, pedigree (3,4,5,2,3)
  (same comment as for aluminium, cast alloy)
  properties: heating value, net 1 MJ
- lead: 0.0179686 kg; lognormal variance with pedigree 0.058125, pedigree (4,2,5,2,1)
  (same comment as for alkyd paint, white, without solvent, in 60% solution state)
  properties: dry mass 1 kg, wet mass 1 kg
- lubricating oil: 0.0129773 kg; lognormal variance with pedigree 0.058125, pedigree (4,2,5,2,1)
  (same comment as for aluminium, cast alloy)
  properties: carbon content, fossil 0.75, dry mass 1 kg, heating value, net 40.2 MJ, wet mass 1 kg
  note on carbon content, fossil: Lubricating oil is produced from diesel. C-content/dry mass of fats and oils considered 75%, from: ecoinvent v2.2 report, n 15a, pg 40
  note on heating value, net: Literature value, Source: IPCC 2006, 2006 IPCC Guidelines for National Greenhouse Gas Inventories, Prepared by the National Greenhouse Gas Inventories Programme, Eggleston H.S., Buendia L., Miwa K., Ngara T. and Tanabe K. (eds). Published: IGES, Japan
- paper, woodfree, coated: 0.000998256 kg; lognormal variance with pedigree 0.058125, pedigree (4,2,5,2,1)
  (same comment as for aluminium, cast alloy)
  properties: carbon content, fossil 0.0590617, carbon content, non-fossil 0.22775, dry mass 0.945 kg, heating value, net 14.11 MJ, water content 0.0582011, wet mass 1 kg
  note on carbon content, fossil: Fossil C content was calculated after fossil C contents of chemicals used in the production of the paper (in Tab 8.72 & 8.73 ecoinvent v2.2 report 11_III, part 8).
  note on carbon content, non-fossil: Biogenic C content was calculated after biogenic C contents of chemicals used in the production of the paper (in Tab 8.72 & 8.73 ecoinvent v2.2 report 11_III, part 8). The cellulose content in 1 kg of paper (on a wet mas basis) was estimated as (1-chemical content), C content of cellulose was considered 0.44 kgC/kg dry mass (ecoinvent v2.2 report, n 15a, pg 40)
- polypropylene, granulate: 0.0399302 kg; lognormal variance with pedigree 0.058125, pedigree (4,2,5,2,1)
  (same comment as for aluminium, cast alloy)
  properties: carbon content, fossil 0.857143, dry mass 1 kg, heating value, net 32.78 MJ, wet mass 1 kg
  note on carbon content, fossil: Polypropylene is formed by the polymerisation of propylene, C3H6 (ecoinvent v2.2 report 11_II)
  note on heating value, net: Value extracted from "treatment of waste polypropylene, open burning"
- steel, chromium steel 18/8, hot rolled: 0.0399302 kg; lognormal variance with pedigree 0.058125, pedigree (4,2,5,2,1)
  (same comment as for aluminium, cast alloy)
  properties: carbon content, fossil 0.0008, dry mass 1 kg, wet mass 1 kg
  note on carbon content, fossil: Stainless steel model is the grade 304 steel (18/8 stainless, 18% chromium 8% nickel; max. 0.08% C)
- steel, low-alloyed, hot rolled: 0.0928378 kg; lognormal variance with pedigree 0.058125, pedigree (4,2,5,2,1)
  (same comment as for alkyd paint, white, without solvent, in 60% solution state)
  properties: carbon content, fossil 0.005, dry mass 1 kg, wet mass 1 kg
  note on carbon content, fossil: Low alloyed steel composition given in Tab. 3.2 ecoinvent v2.2 report 10_partII. Steel assumed to have a C content of 0.5%
- steel, unalloyed: 0.923387 kg; lognormal variance with pedigree 0.058125, pedigree (4,2,5,2,1)
  (same comment as for aluminium, cast alloy)
  properties: carbon content, fossil 0.0025, dry mass 1 kg, wet mass 1 kg
  note on carbon content, fossil: Unalloyed steels or carbon steels are those in which the level of an individual element in no case reaches or exceeds the limiting concentration given in Tab. 3.1 ecoinvent v2.2 report 10_partII. Assumed to have a C content of 0.25%
- synthetic rubber: 0.105815 kg; lognormal variance with pedigree 0.058125, pedigree (4,2,5,2,1)
  (same comment as for aluminium, cast alloy)
  properties: carbon content, fossil 0.871949, dry mass 1 kg, heating value, net 26.42 MJ, wet mass 1 kg
  note on carbon content, fossil: EPDM (Ethylene-propene-diene terpolymer) rubber is a terpolymer of ethylene, propene, and a diene with the residual unsaturated portion of the diene in the side chain (ecoinvent v2.2 report 7-part XX & Ullmann). Chemical formula (deduced from Evidences of Solvent-Induced Miscibility in Polychloroprene-co-Ethylene-Propene Diene Terpolymer Blends, Dubey et al., Journal of Applied Polymer Science, 2009, 111:1884–1891): C20H35
- waste glass sheet: -0.0129773 kg; lognormal variance with pedigree 0.028025, pedigree (4,4,1,2,3)
  (same comment as for electricity, medium voltage)
  production volume
    Calculated from the production volume of harvester in proportion to the respective output amounts.
  properties: dry mass 1 kg, wet mass 1 kg
- waste graphical paper: -0.000998256 kg; lognormal variance with pedigree 0.028025, pedigree (4,4,1,2,3)
  (same comment as for electricity, medium voltage)
  production volume
    (same comment as for waste glass sheet)
  properties: carbon content, non-fossil 0.454955, dry mass 0.888 kg, heating value, net 14.12 MJ, water content 0.126126, wet mass 1 kg
  note on heating value, net: Value taken from the general comment of the treatment dataset.
- waste mineral oil: -0.0129773 kg; lognormal variance with pedigree 0.028025, pedigree (4,4,1,2,3)
  (same comment as for electricity, medium voltage)
  production volume
    (same comment as for waste glass sheet)
  properties: carbon content, fossil 0.864444, dry mass 0.9 kg, heating value, net 34.7 MJ, water content 0.111111, wet mass 1 kg
  note on carbon content, fossil: Tab A.6, ecoinvent v2.2 report 13_I. C content has been calculated after data in the tables, and then referred to 1 kg DM
- waste plastic, mixture: -0.0502123 kg; lognormal variance with pedigree 0.028025, pedigree (4,4,1,2,3)
  (same comment as for heat, central or small-scale, other than natural gas)
  production volume
    (same comment as for waste glass sheet)
  properties: carbon content, fossil 0.747344, dry mass 0.847 kg, heating value, net 30.79 MJ, water content 0.180638, wet mass 1 kg
  note on carbon content, fossil: C content in 1 kg DM was calculated using data in Tab A.2, ecoinvent v2.2 report 13_I
- zinc: 0.0129773 kg; lognormal variance with pedigree 0.058125, pedigree (4,2,5,2,1)
  (same comment as for aluminium, cast alloy)
  properties: dry mass 1 kg, wet mass 1 kg

## Emissions to nature
- Carbon dioxide, fossil [air, non-urban air or from high stacks]: 6.98779e-6 kg; lognormal variance with pedigree 0.062025, pedigree (3,4,5,2,3)
  Proxy, based on "Agricultural Machinery" - pdf-document on the dedicated talk page of ecoinvent (www.ecoinvent.org/talk-pages)
- NMVOC, non-methane volatile organic compounds [air, urban air close to ground]: 0.00862493 kg; lognormal variance with pedigree 0.102025, pedigree (3,4,5,2,3)
  (same comment as for Carbon dioxide, fossil)

## Sampling procedure
Values given in the reference originate mainly from studies about lorry production in Europe as examined and adapted by Zimmermann (2002) and experts estimations.

## Extrapolations
Data are extrapolated, examined and adapted from lorry production in Europe.

## Review by Roland Hischier 2003-08-06
Passed.

## Review by Roland Hischier 2011-09-28
Transfer of documentation done.
