# treatment of waste paperboard, unsorted, sorting

Dataset: EcoSpold 2, unit process
Geography: Europe without Switzerland
Time period: 2012-01-01 to 2022-12-31
Technology level: current
Classification: ISIC rev.4 ecoinvent: 3830:Materials recovery
Scenario: Business-as-Usual
System model: Allocation at the point of substitution
Generated by: Avraam Symeonidis
Database: ecoinvent
isCopyrightProtected: true

## General comment
This activity represents the treatment of 1 kg waste paperboard (cardboard) from separate collection, i.e. a source-segregated municipal solid waste fraction, through sorting for recycling. The activity starts with receiving the unsorted waste paperboard, as collected from the households, at the sorting facility and ends when sorted fractions are produced.

## Included activities start
The activity starts with "waste paperboard, unsorted" being available to the sorting facility.

## Included activities end
The activity ends with "waste paperboard, unsorted" being sorted and "waste paperboard, sorted" available for transportation at the gate of the sorting facility.

## Geography
Europe without Switzerland

## Technology
Technology assumed representative of situation in Europe without Switzerland for the underlying time frame.

## Time period
Data assumed representative of the situation in Europe without Switzerland in 2012.

## Reference product
- waste paperboard, sorted: 1 kg; name BP4; By-product classification Recyclable; CPC 39240: Waste and scrap of paper or paperboard; lognormal variance with pedigree 0.0178, pedigree (4,3,4,4,1)
  The inventory available in ecoinvent 3.3 (cut-off) for “treatment of waste paper, unsorted, sorting {CH}” was used as a proxy for the sorting process of waste paperboard (cardboard) assuming that the energy need, auxiliary materials and waste content were similar. However, all the waste material flows were replaced with the values reported in the material flow analysis in Haupt et al. (2017).
  For more detail see the supporting information in M. Haupt et al. (2018), Life cycle inventories of waste management processes, Data in Brief 19 (2018) 1441-1457.
  Reference: M. Haupt, C. Vadenbo, S. Hellweg, (2017) Do we have the right performance indicators for the circular economy?: insightin tothe Swiss Waste Management System, J.Ind.Ecol. 21 (2017) 615-627, http://dx.doi.org/10.1111/jiec.12506.
  production volume 1.30702e10 kg
    Calculated based on the production volume of the reference product.
  property price 0.0436 EUR2005
    Estimated value; three different sources were used to determine the price for waste paperboard, sorted. 35 AUD/tonne (http://larimer.org/solidwaste/charts/Current.htm, accessed 20130328), 70 GBP/tonne (http://www.letsrecycle.com/prices/waste%20paper, accessed 20130328) and 20 USD/tonne (http://www.oxpaperboard.com/1/post/2013/03/ox-paperboard-announces-price-adjustment-to-uncoated-recycled-paperboard.html, accessed 20130328).
  properties: carbon allocation 0.38854 kg, carbon content 0.483259, carbon content, fossil 0, carbon content, non-fossil 0.483259, dry mass 0.804 kg, heating value, net 15.92 MJ, water content 0.243781, water in wet mass 0.196 kg, wet mass 1 kg

## Inputs from technosphere
- acrylic dispersion, with water, in 58% solution state: 3.45727e-6 kg
- acrylic varnish, with water, in 53% solution state: 1.13596e-6 kg
- aluminium scrap, post-consumer: -7.23411e-5 kg
- aluminium, wrought alloy: 7.23411e-5 kg
- corrugated board box: 7.63006e-5, 0.000177102, 9.79181e-7, 2.8422e-6 kg (4 suppliers, which the file names only by identifier); sum of these 0.000257224 kg
- electricity, low voltage: 6.11526e-5, 0.00012119, 0.00116416, 2.07669e-5, 1.00563e-6, 0.000402287, 3.77654e-6, 0.0003068, 8.21141e-5, 1.22197e-5 kWh (10 suppliers, which the file names only by identifier); sum of these 0.00217547 kWh
- ethylene glycol monoethyl ether: 1.52236e-6 kg
- extrusion, plastic film: 3.87395e-5 kg
- fleece, polyethylene: 1.11271e-11 kg
- heat, district or industrial, natural gas: 0.00122334, 0.00331255, 5.44337e-5 MJ (3 suppliers, which the file names only by identifier); sum of these 0.00459032 MJ
- industrial machine, heavy, unspecified: 6.33348e-7 kg
- injection moulding: 8.73149e-7 kg
- isopropanol: 6.33348e-6 kg
- maize starch: 4.99706e-7 kg
- paper, woodcontaining, lightweight coated: 0.00012073, 0.000358618 kg (2 suppliers, which the file names only by identifier); sum of these 0.000479347 kg
- paper, woodfree, coated: 0.00403832 kg
- polyethylene, high density, granulate: 8.67911e-7 kg
- polyethylene, low density, granulate: 3.70754e-5 kg
- polypropylene, granulate: 1.21062e-6 kg
- printer, laser, black/white: 4.99293e-8 unit
- printer, laser, colour: 4.99347e-8 unit
- printing ink, offset, without solvent, in 47.5% solution state: 2.69318e-5 kg
- sheet rolling, aluminium: 7.23411e-5 kg
- spent solvent mixture: -3.13352e-6, -1.22438e-6 kg (2 suppliers, which the file names only by identifier); sum of these -4.3579e-6 kg
- steel, low-alloyed: 4.81357e-6 kg
- synthetic rubber: 5.20043e-7 kg
- textile, woven cotton: 8.19285e-7 kg
- thermoforming, with calendering: 1.1563e-6 kg
- tin plated chromium steel sheet, 2 mm: 1.07562e-7 m2
- toner module, laser printer, black/white: 9.58643e-6 unit
- toner module, laser printer, colour: 9.58746e-6 unit
- used toner module, laser printer, black/white: -8.43606e-6 kg
- used toner module, laser printer, colour: -8.43697e-6 kg
- waste emulsion paint: -7.48709e-7, -7.05765e-8 kg (2 suppliers, which the file names only by identifier); sum of these -8.19285e-7 kg
- waste paper, unsorted: -0.000566527, -0.000566527 kg (2 suppliers, which the file names only by identifier); sum of these -0.00113305 kg
- waste paperboard, unsorted: -0.000129101, -0.000128122 kg (2 suppliers, which the file names only by identifier); sum of these -0.000257224 kg
- waste polyethylene: -3.79433e-5 kg
- waste polypropylene: -1.21062e-6 kg
- white spirit: 8.86106e-6 kg
- wire drawing, steel: 4.81357e-6 kg

## Emissions to nature
- 2-Propanol [air, urban air close to ground]: 6.33348e-6 kg
- Benzene [air, unspecified]: 8.84971e-11 kg
- Benzene, ethyl- [air, urban air close to ground]: 2.8152e-7 kg
- Heptane [air, urban air close to ground]: 2.75419e-6 kg
- Methanol [air, urban air close to ground]: 2.90527e-7 kg
- Propylene oxide [air, urban air close to ground]: 5.28758e-7 kg
- Toluene [air, urban air close to ground]: 2.48691e-7 kg
- Xylene [air, urban air close to ground]: 2.48691e-7 kg

## Extrapolations
This dataset for Europe without Switzerland has been extrapolated from the corresponding activity in Switzerland. The uncetainty information has been adjusted accordingly.
