# treatment of residue from TiO2 production, chloride process, residual material landfill

Dataset: EcoSpold 2, unit process
Geography: CH
Time period: 1994-01-01 to 2022-12-31
Technology level: current
Classification: ISIC rev.4 ecoinvent: 3822:Treatment and disposal of hazardous waste
Classification: EcoSpold01Categories: waste management/residual material landfill
Synonyms: neutralised spray vessel solids from titanium dioxide production; inorganic residue from titanium dioxide production with the chloride process
Tags: ConvertedDataset; Treatment
Scenario: Business-as-Usual
System model: Allocation at the point of substitution
Generated by: Gabor Doka (obsolete)
Published in: Doka G. 2007
Database: ecoinvent
isCopyrightProtected: true

## General comment
Inventoried waste contains 100% residue from TiO2 production (chloride process); .
waste composition (wet, in ppm): H2O 560000; O 200000; H n.a.; C 90000; S n.a.; N n.a.; P 893.79; B 7.1933; Cl n.a.; Br n.a.; F n.a.; I n.a.; Ag 0.714; As 0.62521; Ba 149.04; Cd 11.748; Co 1.3453; Cr n.a.; Cu n.a.; Hg n.a.; Mn 259.36; Mo 1.9551; Ni n.a.; Pb 502.43; Sb 22.564; Se 0.31969; Sn 73.44; V 200; Zn 770; Be n.a.; Sc n.a.; Sr n.a.; Ti 80000; Tl n.a.; W n.a.; Si 20000; Fe 25000; Ca 22000; Al n.a.; K 2059.7; Mg n.a.; Na n.a.;
Share of carbon in waste that is biogenic 0%.

[This dataset was already contained in the ecoinvent database version 2. It was not individually updated during the transfer to ecoinvent version 3. Life Cycle Impact Assessment results may still have changed, as they are affected by changes in the supply chain, i.e. in other datasets. This dataset was generated following the ecoinvent quality guidelines for version 2. It may have been subject to central changes described in the ecoinvent version 3 change report (http://www.ecoinvent.org/database/ecoinvent-version-3/reports-of-changes/), and the results of the central updates were reviewed extensively. The changes added e.g. consistent water flows and other information throughout the database. The documentation of this dataset can be found in the ecoinvent reports of version 2, which are still available via the ecoinvent website. The change report linked above covers all central changes that were made during the conversion process.]

## Included activities end
Waste-specific short-term emissions to water from leachate. Long-term emissions from landfill to ground water.

## Geography
Technology encountered in Switzerland in 2000. Landfill includes base seal and leachate collection system.

## Technology
Swiss residual material landfill for polluted, inorganic waste. With base seal and leachate collection system. Recultivation after closure.

## Time period
Waste composition as given in literature reference, theoretical data or other source. Transfer coefficients from prospective model.

## Reference product
- residue from TiO2 production, chloride process: -1 kg; By-product classification Waste; CPC 39367: Waste and scrap of tungsten, molybdenum, tantalum, magnesium, cobalt, cadmium, titanium, zirconium, beryllium […]
  EcoSpold01Location=CH
  production volume 0.0336675 kg
    This is a placeholder value that does not reflect real-world production volumes. This dataset does not currently require a real-world production volume to work in the database framework, and no actual data were collected yet. This has no negative effect on the results of the ecoinvent database. The placeholder value of this activity was scaled according to the nominal GDP of 2005 (source: United Nations, http://data.un.org/Glossary.aspx?q=GDP+%28current+US%24%29, accessed 20130726) to reflect an appropriate share of the global production volume, which is also a placeholder value.
  property heating value, net 0 MJ
    Non combustible products are assumed to have an LHV equal to zero (0).
  property price 0 EUR2005
    Waste products are assigned a price of zero as they are assumed to require further treatment.
  properties: carbon allocation 0.09 kg, carbon content 0.204545, carbon content, fossil 0.204545, carbon content, non-fossil 0, dry mass 0.44 kg, water content 1.27273, water in wet mass 0.56 kg, wet mass 1 kg

## Inputs from technosphere
- process-specific burdens, residual material landfill: 1 kg; lognormal variance with pedigree 0.04, pedigree (1,1,5,1,1)
  EcoSpold01Location=CH
  demands per kilogram waste. uncertainty is heeded in the module;activityLink introduced to establish a direct link to the corresponding regional supply of this product
- residual material landfill: 2.09e-9 unit; lognormal variance with pedigree 0.04, pedigree (1,1,5,1,1)
  EcoSpold01Location=CH
  demands per kilogram waste. uncertainty is heeded in the module

## Emissions to nature
- Antimony ion [water, ground-, long-term]: 1.46e-5 kg; lognormal variance with pedigree 1.21, pedigree (1,1,5,1,1)
  uncertainty is calculated from uncertainties in waste composition and transfer coefficients in incinerator and landfills.
- Antimony ion [water, surface water]: 7.96e-6 kg; lognormal variance with pedigree 1.23, pedigree (1,1,5,1,1)
  uncertainty is calculated from uncertainties in waste composition and transfer coefficients in residual landfill
- Arsenic ion [water, ground-, long-term]: 6.25e-16 kg; lognormal variance with pedigree 1.69, pedigree (1,1,5,1,1)
  (same comment as for Antimony ion)
- Arsenic ion [water, surface water]: 6.25e-7 kg; lognormal variance with pedigree 1.67, pedigree (1,1,5,1,1)
  (same comment as for Antimony ion)
- BOD5, Biological Oxygen Demand [water, ground-, long-term]: 0.0481 kg; lognormal variance with pedigree 0.22, pedigree (1,1,5,1,1)
  (same comment as for Antimony ion)
- BOD5, Biological Oxygen Demand [water, surface water]: 8.03e-5 kg; lognormal variance with pedigree 0.81, pedigree (1,1,5,1,1)
  (same comment as for Antimony ion)
- Barium II [water, ground-, long-term]: 1.23e-6 kg; lognormal variance with pedigree 6.69, pedigree (1,1,5,1,1)
  (same comment as for Antimony ion)
- Barium II [water, surface water]: 2.06e-9 kg; lognormal variance with pedigree 2.17, pedigree (1,1,5,1,1)
  (same comment as for Antimony ion)
- Boron [water, ground-, long-term]: 7.07e-6 kg; lognormal variance with pedigree 1.35, pedigree (1,1,5,1,1)
  (same comment as for Antimony ion)
- Boron [water, surface water]: 5.64e-8 kg; lognormal variance with pedigree 1.74, pedigree (1,1,5,1,1)
  (same comment as for Antimony ion)
- COD, Chemical Oxygen Demand [water, ground-, long-term]: 0.147 kg; lognormal variance with pedigree 0.22, pedigree (1,1,5,1,1)
  (same comment as for Antimony ion)
- COD, Chemical Oxygen Demand [water, surface water]: 0.000245 kg; lognormal variance with pedigree 0.81, pedigree (1,1,5,1,1)
  (same comment as for Antimony ion)
- Cadmium II [water, ground-, long-term]: 7.98e-8 kg; lognormal variance with pedigree 7.51, pedigree (1,1,5,1,1)
  (same comment as for Antimony ion)
- Cadmium II [water, surface water]: 1.33e-10 kg; lognormal variance with pedigree 2.53, pedigree (1,1,5,1,1)
  (same comment as for Antimony ion)
- Calcium II [water, ground-, long-term]: 0.00199 kg; lognormal variance with pedigree 1.76, pedigree (1,1,5,1,1)
  (same comment as for Antimony ion)
- Calcium II [water, surface water]: 3.32e-6 kg; lognormal variance with pedigree 1.22, pedigree (1,1,5,1,1)
  (same comment as for Antimony ion)
- Cobalt II [water, ground-, long-term]: 2.3e-7 kg; lognormal variance with pedigree 2.35, pedigree (1,1,5,1,1)
  (same comment as for Antimony ion)
- Cobalt II [water, surface water]: 3.84e-10 kg; lognormal variance with pedigree 2.39, pedigree (1,1,5,1,1)
  (same comment as for Antimony ion)
- DOC, Dissolved Organic Carbon [water, ground-, long-term]: 0.0582 kg; lognormal variance with pedigree 0.22, pedigree (1,1,5,1,1)
  (same comment as for Antimony ion)
- DOC, Dissolved Organic Carbon [water, surface water]: 9.71e-5 kg; lognormal variance with pedigree 0.81, pedigree (1,1,5,1,1)
  (same comment as for Antimony ion)
- Iron ion [water, ground-, long-term]: 0.000125 kg; lognormal variance with pedigree 7.31, pedigree (1,1,5,1,1)
  (same comment as for Antimony ion)
- Iron ion [water, surface water]: 2.09e-7 kg; lognormal variance with pedigree 1.58, pedigree (1,1,5,1,1)
  (same comment as for Antimony ion)
- Lead II [water, ground-, long-term]: 2.61e-6 kg; lognormal variance with pedigree 7.71, pedigree (1,1,5,1,1)
  (same comment as for Antimony ion)
- Lead II [water, surface water]: 4.35e-9 kg; lognormal variance with pedigree 2.06, pedigree (1,1,5,1,1)
  (same comment as for Antimony ion)
- Manganese II [water, ground-, long-term]: 2.14e-6 kg; lognormal variance with pedigree 6.62, pedigree (1,1,5,1,1)
  (same comment as for Antimony ion)
- Manganese II [water, surface water]: 3.58e-9 kg; lognormal variance with pedigree 2.1, pedigree (1,1,5,1,1)
  (same comment as for Antimony ion)
- Molybdenum VI [water, ground-, long-term]: 8.98e-9 kg; lognormal variance with pedigree 1.54, pedigree (1,1,5,1,1)
  (same comment as for Antimony ion)
- Molybdenum VI [water, surface water]: 1.95e-6 kg; lognormal variance with pedigree 1.52, pedigree (1,1,5,1,1)
  (same comment as for Antimony ion)
- Phosphate [water, ground-, long-term]: 0.000612 kg; lognormal variance with pedigree 1.27, pedigree (1,1,5,1,1)
  (same comment as for Antimony ion)
- Phosphate [water, surface water]: 1.02e-6 kg; lognormal variance with pedigree 1.5, pedigree (1,1,5,1,1)
  (same comment as for Antimony ion)
- Potassium I [water, ground-, long-term]: 0.00148 kg; lognormal variance with pedigree 0.61, pedigree (1,1,5,1,1)
  (same comment as for Antimony ion)
- Potassium I [water, surface water]: 0.000581 kg; lognormal variance with pedigree 0.65, pedigree (1,1,5,1,1)
  (same comment as for Antimony ion)
- Selenium IV [water, ground-, long-term]: 2.07e-7 kg; lognormal variance with pedigree 1.76, pedigree (1,1,5,1,1)
  (same comment as for Antimony ion)
- Selenium IV [water, surface water]: 1.13e-7 kg; lognormal variance with pedigree 1.78, pedigree (1,1,5,1,1)
  (same comment as for Antimony ion)
- Silicon [water, ground-, long-term]: 0.02 kg; lognormal variance with pedigree 0.33, pedigree (1,1,5,1,1)
  (same comment as for Antimony ion)
- Silicon [water, surface water]: 4.5e-5 kg; lognormal variance with pedigree 0.88, pedigree (1,1,5,1,1)
  (same comment as for Antimony ion)
- Silver I [water, ground-, long-term]: 2.75e-8 kg; lognormal variance with pedigree 4.3, pedigree (1,1,5,1,1)
  (same comment as for Antimony ion)
- Silver I [water, surface water]: 4.59e-11 kg; lognormal variance with pedigree 2.67, pedigree (1,1,5,1,1)
  (same comment as for Antimony ion)
- TOC, Total Organic Carbon [water, ground-, long-term]: 0.0582 kg; lognormal variance with pedigree 0.22, pedigree (1,1,5,1,1)
  (same comment as for Antimony ion)
- TOC, Total Organic Carbon [water, surface water]: 9.71e-5 kg; lognormal variance with pedigree 0.81, pedigree (1,1,5,1,1)
  (same comment as for Antimony ion)
- Tin ion [water, ground-, long-term]: 1.39e-6 kg; lognormal variance with pedigree 4.97, pedigree (1,1,5,1,1)
  (same comment as for Antimony ion)
- Tin ion [water, surface water]: 2.32e-9 kg; lognormal variance with pedigree 2.15, pedigree (1,1,5,1,1)
  (same comment as for Antimony ion)
- Titanium ion [water, ground-, long-term]: 0.0237 kg; lognormal variance with pedigree 0.55, pedigree (1,1,5,1,1)
  (same comment as for Antimony ion)
- Titanium ion [water, surface water]: 3.96e-5 kg; lognormal variance with pedigree 0.93, pedigree (1,1,5,1,1)
  (same comment as for Antimony ion)
- Vanadium V [water, ground-, long-term]: 0.000154 kg; lognormal variance with pedigree 0.93, pedigree (1,1,5,1,1)
  (same comment as for Antimony ion)
- Vanadium V [water, surface water]: 4.91e-7 kg; lognormal variance with pedigree 1.44, pedigree (1,1,5,1,1)
  (same comment as for Antimony ion)
- Zinc II [water, ground-, long-term]: 9.44e-6 kg; lognormal variance with pedigree 5.58, pedigree (1,1,5,1,1)
  (same comment as for Antimony ion)
- Zinc II [water, surface water]: 1.58e-8 kg; lognormal variance with pedigree 1.9, pedigree (1,1,5,1,1)
  (same comment as for Antimony ion)

## Sampling procedure
Landfill model based on observed leachate concentrations in literature. Extrapolated to 60'000 years heeding chemical characteristics. Initial waste composition from various literature sources.

## Review by Niels Jungbluth 2003-07-15
Passed. Calculation for standard deviation 95 of, i.e., infrastructure,
land occupation, transport services or other services can differ from
standard Pedigree approach used in this project and figures obtained by
this procedure.
