# treatment of wastewater from maize starch production, wastewater treatment

Dataset: EcoSpold 2, unit process
Geography: RoW
Time period: 2010-01-01 to 2022-12-31
Technology level: current
Classification: ISIC rev.4 ecoinvent: 3700:Sewerage
Scenario: Business-as-Usual
System model: Allocation at the point of substitution
Generated by: Nikolia Stoikou
Database: ecoinvent
isCopyrightProtected: true

## General comment
This dataset represents the treatment of a wastewater, generated from an ordinary transforming activity. Purification in wastewater treatment of 'wastewater from maize starch production'. Recommended use of this dataset: to be used for wastewaters, generated from ordinary transforming activities, of equal or similar composition. The wastewater has a content of TOC: 1.8824 kg/m3, COD: 7.33879 kg/m3 and BOD: 3.54942 kg/m3. TOC is equal to C present in the wastewater, COD is calculated as TOC/0.2565 and BOD is calculated as COD/0.53034. Detailed elemental composition can be found in the properties of the wastewater treated. Share of biogenic carbon in the sludge: 100%.

## Included activities start
The activity starts with the wastewater being available at the gate of the treatment facility. Collection and transportation of the wastewater to the treatment plant is not included.

## Included activities end
The activity ends with the wastewater being treated and waste-specific emissions released to the environment. Expenditures from treatment of wastewater in waste treatment plant are included as well as relevant infrastructure of the plant. Emissions from any sludge digestion, biogas generation and utilization (heeding specific wastewater composition) are also included. Waste-specific direct emissions of untreated wastewater and required territory-specific infrastructure for sewers are not contained within this dataset but instead in the regional market datasets for this wastewater.

## Geography
The site has mean annual temperature (MAT) of 16.743579766537 degC, mean annual precipitation (MAP) of 1250.84108527132 mm/year, mean annual actual evaporation (EAT) of 460.58904958214 mm/year. In the WWT plant, 0% of its water input are lost due to evaporation from pools, 0.0927% of water is *gained* from organic mass degradation, and 0.068% is removed off site via sludge disposal. (References: UN data, 2020. Precipitation, Environment Statistics Database, United Nations Statistics Division Available at: http://data.un.org/Data.aspx?q=precipitation&d=ENV&f=variableID%3a6; World Bank, 2022. Surface area (sq.km), World Bank Group Available at: https://data.worldbank.org/indicator/AG.SRF.TOTL.K2; Doka G.,2021. A model for composition-specific life cycle inventories of regionalised wastewater fates, Zurich, Switzerland. http://www.doka.ch/publications.htm)

## Technology
This is an inventory for the disposal of a selected wastewater in Global. The reference unit is 1 m3 wastewater input. This activity represents the treatment of a specific wastewater in a WWT plant (while direct emissions and sewering are heeded in the upstream market dataset for this wastewater). The size of the treatment plant infrastructure is for a supranational region average territory situation. The assumed size of the WWTP treats 82.2 Mio m3 per year. The mixture of WWTP with one, two, or three stages is 8.2%-41.2%-50.6%. The actual, waste-specific oxygen requirement in the biological stages is 1.3243915 kg O. The digestion process produces 199.42235 litres of biogas with an energy content of 4.272571MJ. 60.5% of the biogas is utilized for energy. The remainder is flared. The gross electric efficiency is 26.564%. The gross thermal efficiency is 47.853%. After digestion, the remaining total sludge mass (dry matter) is 1.726kg DM.

## Reference product
- heat, central or small-scale, other than natural gas: 1 MJ; By-product classification allocatable product; CPC 17300: Steam and hot water; lognormal variance with pedigree 2.409, pedigree (1,1,1,1,1)
  net heat output from digester gas utilization in wastewater treatment plant.
  Uncertainty: Uncertainty calculated from wastewater technosphere fate uncertainty, wastewater composition uncertainty, and treatment model uncertainty
  production volume 2.87188e6 MJ
    Calculated in proportion to wastewater reference product.
  property price 0.0106 EUR2005
    Average European district heat price from Ecoheatcool and Euroheat 2005-2006, Ecoheat Work package 1: The European heat market. Final report. 10.6 EUR/GJ i s the price of district heat. http://www.solarthermalworld.org/files/Ecoheatcool%20WP1%20Web.pdf?download
  properties: carbon allocation 0 kg, carbon content 0, heating value, net 1 MJ

## Inputs from technosphere
- chemical factory, organics: 1.69494e-13, 3.66905e-11 unit (2 suppliers, which the file names only by identifier); sum of these 3.686e-11 unit
- electricity, medium voltage: 4.57076e-5, 0.000128642, 1.22971e-5, 3.42571e-6, 4.17966e-5, 0.00449339, 5.80364e-6, 0.000220946, 0.00140208, 0.000277003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 kWh (47 suppliers, which the file names only by identifier); sum of these 0.0234467 kWh
- heat, district or industrial, natural gas: 0.00168985, 0.359781, 0.00591213, 0.000111183 MJ (4 suppliers, which the file names only by identifier); sum of these 0.367494 MJ
- maize grain: 0.00684152, 0.000218482, 0.109141 kg (3 suppliers, which the file names only by identifier); sum of these 0.116201 kg
- tap water: 0.000335711, 0.0139903, 0.000554818, 0.000249502, 0.00103526, 0.160098, 0.000363954, 0.000828823, 0.00278892 kg (9 suppliers, which the file names only by identifier); sum of these 0.180245 kg
- wastewater from maize starch production: -3.05037e-7, -6.33706e-5 m3 (2 suppliers, which the file names only by identifier); sum of these -6.36757e-5 m3

## Emissions to nature
- Water [air, unspecified]: 0.000104913 m3
- Water [water, unspecified]: 1.1657e-5 m3
