# manual treatment facility construction, waste electric and electronic equipment

Dataset: EcoSpold 2, unit process
Geography: GLO
Time period: 2005-01-01 to 2022-12-31
Technology level: current
Classification: EcoSpold01Categories: waste management/recycling
Classification: ISIC rev.4 ecoinvent: 4290:Construction of other civil engineering projects
Tags: ConvertedDataset
Scenario: Business-as-Usual
System model: Allocation at the point of substitution
Generated by: Roland Hischier
Published in: Hischier R. 2007
Database: ecoinvent
isCopyrightProtected: true

## General comment
The functional unit represents a site for the manual treatment of WEEE devices. Process data based on own estimations, using proper experiences within the Swiss e-Waste systems. The here described manual treatment site has an assumed treatment capacity of 2’500 t per year over a time span of 25 years.
[This dataset was already contained in the ecoinvent database version 2. It was not individually updated during the transfer to ecoinvent version 3. Life Cycle Impact Assessment results may still have changed, as they are affected by changes in the supply chain, i.e. in other datasets. This dataset was generated following the ecoinvent quality guidelines for version 2. It may have been subject to central changes described in the ecoinvent version 3 change report (http://www.ecoinvent.org/database/ecoinvent-version-3/reports-of-changes/), and the results of the central updates were reviewed extensively. The changes added e.g. consistent water flows and other information throughout the database. The documentation of this dataset can be found in the ecoinvent reports of version 2, which are still available via the ecoinvent website. The change report linked above covers all central changes that were made during the conversion process.]

## Included activities end
This module includes land use and buildings as well as the respective disposal activities of a plant for manual WEEE treatment.

## Geography
This module is based on experiences in Switzerland as a proxy for the global situation.

## Technology
Manual treatment plant, based on proper knowledge about companies in Switzerland

## Reference product
- manual treatment facility, waste electric and electronic equipment: 1 unit; By-product classification allocatable product; CPC 53290: Other civil engineering works
  EcoSpold01Location=GLO
  production volume 1 unit
    Dummy value to be replaced by measured, estimated or calculated value
  property price 211186 EUR2005
    Calculated based on inputs: The price of the product has been calculated as a sum of the values of the material and energy inputs for this product. This value is therefore a rough estimation. It may underestimate the real price since there are additional expenses when producing any product. These expences can include for example labour costs, treatment of waste materials and profit for the producer. Please consider carefully whether this level of data quality is acceptable for your application.
  properties: carbon allocation 0 kg, carbon content 0

## Inputs from technosphere
- building, hall: 1500 m2; lognormal variance with pedigree 0.3701, pedigree (3,5,5,3,1)
  EcoSpold01Location=CH
  Own estimation, based on proper knowledge of Swiss recycling sites
  Uncertainty: own estimation, based on proper knowledge of Swiss recycling sites
- road, company, internal: 2083.3 m2*year; lognormal variance with pedigree 0.3701, pedigree (3,5,5,3,1)
  Own estimation, based on proper knowledge of Swiss recycling sites
  EcoSpold01Location=CH
  Uncertainty: own estimation, based on proper knowledge of Swiss recycling sites

## Inputs from nature
- Occupation, construction site [natural resource, land]: 1666.7 m2*year; lognormal variance with pedigree 0.1901, pedigree (3,5,5,3,1)
  Own estimation, based on proper knowledge of Swiss recycling sites
  Uncertainty: own estimation, based on proper knowledge of Swiss recycling sites
- Occupation, industrial area [natural resource, land]: 41666.3 m2*year; lognormal variance with pedigree 0.1101, pedigree (3,5,5,3,1)
  (same comment as for Occupation, construction site)
- Transformation, from unspecified [natural resource, land]: 1666.7 m2; lognormal variance with pedigree 0.1901, pedigree (3,5,5,3,1)
  (same comment as for Occupation, construction site)
- Transformation, to industrial area [natural resource, land]: 1666.63 m2; lognormal variance with pedigree 0.1901, pedigree (3,5,5,3,1)
  (same comment as for Occupation, construction site)

## Sampling procedure
Literature & own estimations

## Extrapolations
see Geography and Technology

## Review by Jürgen Sutter 2007-08-31
passed.
