# treatment of sewage sludge, 75% water, WWT, WW from PV cell production, sanitary landfill

Dataset: EcoSpold 2, unit process
Geography: GLO
Time period: 1994-01-01 to 2022-12-31
Technology level: current
Classification: ISIC rev.4 ecoinvent: 3821:Treatment and disposal of non-hazardous waste
Scenario: Business-as-Usual
System model: Allocation at the point of substitution
Generated by: Nikolia Stoikou
Database: ecoinvent
isCopyrightProtected: true

## General comment
The process represents the treatment of a waste (sewage sludge) that is exclusively generated from another waste treatment. Sewage sludge is generated in the wastewater treatment of 'wastewater from PV cell production'. Recommended use of this dataset: to be used within the specific chain of treatments for 'wastewater from PV cell production'. Share of biogenic carbon in the sludge: 0%. Landfill gas capture and utilisation generates 0.03321 kWh of electricity and 0.0599 MJ of useful heat. 0.002598 kg waste mass remains in the landfill even after the long term period. "PV" stands for "Photovoltaic".

## Included activities start
The activity starts with the waste being available at the gate of the treatment facility. Collection and transportation of the waste to the treatment plant is not included.

## Included activities end
The activity ends with the waste being treated and waste-specific emissions from the landfill are released to the environment (air due to landfil gas and water due to landfil leachate).

## Geography
Landfill site with mean annual temperature (MAT) of 16.743579766537 degC, mean annual precipitation (MAP) of 1250.84108527132 mm/year, and net infiltration of 790.252035689178 mm/year.The leachate percolating through the landfill has an average residence time of 6.33 years.
References: UN data, 2020. Precipitation, Environment Statistics Database, United Nations Statistics Division Available at: http://data.un.org/Data.aspx?q=precipitation&d=ENV&f=variableID%3a6;
World Bank, 2022. Surface area (sq.km), World Bank Group Available at: https://data.worldbank.org/indicator/AG.SRF.TOTL.K2;
Doka G.,2021. A model for composition-specific life cycle inventories of regionalised wastewater fates, Zurich, Switzerland. http://www.doka.ch/publications.htm

## Technology
Sanitary (controlled) landfill for municipal solid waste. Ultimate average landfill height is 20 meters. Operation phase duration is 30 years. The total raw landfill gas mass produced in the landfill from this waste is 0.1051 kg. The total CH4 mass in the raw landfill gas is 0.02523 kg. Percentage of landfill gas directly emitted is 47w%. Percentage of landfill gas captured and flared is 18.02w%. Percentage of landfill gas captured and utilised is 34.98%. Conversion efficiencies are 27.8e% for electricity and 13.5e% for useful heat. Leachate generated during the first 100 years is collected and treated region-specifically before emission. Based on average waste composition and climate data the end of carbonate phase is estimated to be reached 2'863 years after waste deposition.

## Reference product
- heat, district or industrial, other than natural gas: 1 MJ; By-product classification allocatable product; CPC 17300: Steam and hot water; lognormal variance with pedigree 0.5224, pedigree (5,5,5,5,5)
  Net production of heat from landfill gas utilisation.
  Uncertainty: Uncertainty calculated depending on waste input and uncertainty of transfer coefficients in landfill to landfill gas, uncertainty in gas capture and utilisation.
  production volume 19880.8 MJ
    Calculated from the production volume of the reference product in proportion to the respective output amounts.
  property corresponding fuel use, propane, furnace >100kW 0 MJ; name fuel_use
    Lower heating value of the fuel input related to the heat/electricity output, taken directly from ecoinvent v3.0 dataset "heat production, natural gas, at industrial furnace >100kW, GLO 2000".
  property price 0.0106 EUR2005
    Average European district heat price from Ecoheatcool and Euroheat 2005-2006, Ecoheat Work package 1: The European heat market. Final report. 10.6 EUR/GJ i s the price of district heat. http://www.solarthermalworld.org/files/Ecoheatcool%20WP1%20Web.pdf?download
  properties: carbon allocation 0 kg, carbon content 0, carbon content, fossil 0, carbon content, non-fossil 0, dry mass 1 kg, heating value, net 1 MJ, water content 0, water in wet mass 0 kg, wet mass 1 kg

## Inputs from technosphere
- acetic acid, without water, in 98% solution state: 1.79343e-7 kg
- aluminium alloy, AlMg3: 4.58065e-5 kg
- aluminium, wrought alloy: 4.28508e-7 kg
- ammonia, anhydrous, liquid: 2.32633e-8, 2.43825e-9, 2.37445e-8, 8.961e-8, 1.1984e-8, 1.08999e-8, 2.57859e-7, 7.70306e-9 kg (8 suppliers, which the file names only by identifier); sum of these 4.27502e-7 kg
- argon, liquid: 1.62919e-6 kg
- cadmium telluride, semiconductor-grade: 6.95861e-7 kg
- calcium chloride: 1.36853e-6 kg
- carbon dioxide, liquid: 2.21114e-7, 1.02731e-9 kg (2 suppliers, which the file names only by identifier); sum of these 2.22141e-7 kg
- chemical, inorganic: 1.65339e-7 kg
- chromium: 8.99868e-8 kg
- copper, cathode: 9.24445e-8 kg
- electricity, medium voltage: 2.63351e-8, 3.55591e-8, 5.11407e-8, 1.06752e-8, 6.25283e-7, 0.000437196, 3.37704e-8, 1.26459e-8, 0.000311001, 0.000137472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 kWh (50 suppliers, which the file names only by identifier); sum of these 0.00250473 kWh
- ethanol, without water, in 99.7% solution state, from ethylene: 4.0665e-8 kg
- ethylvinylacetate, foil: 1.08448e-5 kg
- flat glass, uncoated: 6.48753e-7, 0.00015388 kg (2 suppliers, which the file names only by identifier); sum of these 0.000154528 kg
- glass fibre reinforced plastic, polyamide, injection moulded: 3.0784e-6 kg
- hazardous waste, for incineration: -4.17336e-6, -3.24161e-8, -8.47337e-10 kg (3 suppliers, which the file names only by identifier); sum of these -4.20663e-6 kg
- heat, district or industrial, natural gas: 3.78528e-5, 1.31699e-6, 0.000267741, 4.39968e-6 MJ (4 suppliers, which the file names only by identifier); sum of these 0.000311311 MJ
- heat, district or industrial, other than natural gas: 7.01222e-5, 3.24863e-8 MJ (2 suppliers, which the file names only by identifier); sum of these 7.01547e-5 MJ
- hydrochloric acid, without water, in 30% solution state: 2.89343e-6 kg
- hydrogen fluoride: 2.39297e-6 kg
- hydrogen peroxide, without water, in 50% solution state: 1.47261e-7, 6.31531e-10 kg (2 suppliers, which the file names only by identifier); sum of these 1.47893e-7 kg
- isopropanol: 5.06403e-6, 2.53735e-10 kg (2 suppliers, which the file names only by identifier); sum of these 5.06428e-6 kg
- metallization paste, back side: 3.12808e-7 kg
- metallization paste, back side, aluminium: 4.56176e-6 kg
- metallization paste, front side: 4.69206e-7 kg
- multi-Si wafer: 3.80325e-5 m2
- multi-Si wafer, ribbon: 3.62072e-6 m2
- municipal solid waste: -1.14898e-10, -6.75013e-9, -4.13734e-11, -3.42739e-6, -2.89515e-11 kg (5 suppliers, which the file names only by identifier); sum of these -3.43432e-6 kg
- nitric acid, without water, in 50% solution state: 5.40264e-8, 6.54837e-9, 8.02748e-8, 1.99629e-7, 2.59611e-7, 9.56516e-8, 3.2898e-7, 8.0806e-10, 6.04614e-7, 7.47896e-7 kg (10 suppliers, which the file names only by identifier); sum of these 2.37804e-6 kg
- nitrogen, liquid: 0.000119642, 1.10528e-8 kg (2 suppliers, which the file names only by identifier); sum of these 0.000119653 kg
- oxygen, liquid: 6.46487e-6 kg
- phosphoric acid, fertiliser grade, without water, in 70% solution state: 4.86841e-7 kg
- phosphorus oxychloride: 1.01182e-7 kg
- photovoltaic cell factory: 2.53748e-11 unit
- photovoltaic panel factory: 1.14269e-10 unit
- polystyrene, expandable: 2.58328e-8 kg
- section bar extrusion, aluminium: 4.58065e-5 kg
- silicone product: 2.72093e-8, 3.40883e-6 kg (2 suppliers, which the file names only by identifier); sum of these 3.43604e-6 kg
- single-Si wafer, photovoltaic: 2.56415e-5 m2
- sodium chloride, powder: 1.2941e-6 kg
- sodium hydroxide, without water, in 50% solution state: 1.06619e-5 kg
- sodium silicate, spray powder, 80%: 4.7442e-6 kg
- solar glass, low-iron: 0.000193527 kg
- solvent, organic: 9.09751e-8 kg
- steel, chromium steel 18/8: 3.19654e-7 kg
- sulfuric acid: 1.1195e-6, 3.18745e-9 kg (2 suppliers, which the file names only by identifier); sum of these 1.12269e-6 kg
- synthetic rubber: 8.08097e-7 kg
- tap water: 5.71207e-5, 0.0022807 kg (2 suppliers, which the file names only by identifier); sum of these 0.00233782 kg
- tetrafluoroethylene: 2.00195e-7 kg
- titanium dioxide: 8.99347e-11 kg
- waste, from silicon wafer production, inorganic: -1.74909e-5 kg
- wastewater from PV cell production: -1.49552e-5, -1.31707e-10 m3 (2 suppliers, which the file names only by identifier); sum of these -1.49553e-5 m3
- water, completely softened: 0.00372734, 0.00497939 kg (2 suppliers, which the file names only by identifier); sum of these 0.00870673 kg

## Inputs from nature
- Water, cooling, unspecified natural origin [natural resource, in water]: 6.33432e-5 m3

## Emissions to nature
- Aluminium III [air, urban air close to ground]: 4.90064e-8 kg
- Cadmium II [air, urban air close to ground]: 1.6107e-11 kg
- Carbon dioxide, fossil [air, urban air close to ground]: 2.22141e-7 kg
- Carbon monoxide, fossil [air, urban air close to ground]: 1.20013e-9 kg
- Ethane, 1,1,1,2-tetrafluoro-, HFC-134a [air, urban air close to ground]: 2.44816e-10 kg
- Ethane, hexafluoro-, HFC-116 [air, urban air close to ground]: 7.52427e-9 kg
- Hydrochloric acid [air, urban air close to ground]: 1.68914e-8 kg
- Hydrogen fluoride [air, urban air close to ground]: 3.07594e-10 kg
- Lead II [air, urban air close to ground]: 4.90064e-8 kg
- Methane, tetrafluoro-, R-14 [air, urban air close to ground]: 1.57089e-8 kg
- Methane, trifluoro-, HFC-23 [air, urban air close to ground]: 4.17189e-11 kg
- NMVOC, non-methane volatile organic compounds [air, urban air close to ground]: 1.22776e-5 kg
- Nitric acid [air, urban air close to ground]: 2.79907e-9 kg
- Nitrogen oxides [air, urban air close to ground]: 2.72456e-8 kg
- Particulate Matter, < 2.5 um [air, urban air close to ground]: 1.68914e-7 kg
- Silicon [air, urban air close to ground]: 4.6139e-9 kg
- Silver I [air, urban air close to ground]: 4.90064e-8 kg
- Sodium [air, urban air close to ground]: 3.07594e-9 kg
- Tin ion [air, urban air close to ground]: 4.90064e-8 kg
- Water [air, unspecified]: 2.58515e-5 m3
- Water [air, urban air close to ground]: 1.16988e-6 m3
- BOD5, Biological Oxygen Demand [water, unspecified]: 9.11026e-9 kg
- COD, Chemical Oxygen Demand [water, unspecified]: 3.06881e-8 kg
- Cadmium II [water, unspecified]: 4.375e-12 kg
- Copper ion [water, unspecified]: 2.37875e-11 kg
- DOC, Dissolved Organic Carbon [water, unspecified]: 1.1366e-8 kg
- Suspended solids, unspecified [water, unspecified]: 1.13153e-8 kg
- TOC, Total Organic Carbon [water, unspecified]: 1.1366e-8 kg
- Water [water, unspecified]: 3.2411e-5 m3
