# treatment of waste rubber, unspecified, municipal incineration

Dataset: EcoSpold 2, unit process
Geography: Europe without Switzerland
Time period: 2006-01-01 to 2022-12-31
Technology level: current
Classification: ISIC rev.4 ecoinvent: 3821:Treatment and disposal of non-hazardous waste
Synonyms: municipal waste incineration; Siedlungsabfallverbrennung; Kehrichtverbrennung
Scenario: Business-as-Usual
System model: Allocation at the point of substitution
Share of production covered: 1.8 %
Generated by: [System]
Database: ecoinvent
isCopyrightProtected: true

## General comment
This dataset represents the activity of waste disposal of waste rubber, unspecified in a municipal solid waste incinerator (MSWI) // Recommended use of this dataset: For small or large used rubber parts (can be as part of a larger contraption), which go to disposal as part of communal waste mixture. // // Waste composition (wet, in ppm): upper heating value 29.3 MJ/kg; lower heating value 27.19 MJ/kg; H2O n.a.; O n.a.; H 106690; C 853530; S 3700; N n.a.; P n.a.; B n.a.; Cl 20000; Br n.a.; F n.a.; I n.a.; Ag n.a.; As n.a.; Ba n.a.; Cd 8; Co n.a.; Cr n.a.; Cu n.a.; Hg 0.001; Mn n.a.; Mo n.a.; Ni n.a.; Pb 70; Sb n.a.; Se n.a.; Sn n.a.; V n.a.; Zn 16000; Be n.a.; Sc n.a.; Sr n.a.; Ti n.a.; Tl n.a.; W n.a.; Si n.a.; Fe n.a.; Ca n.a.; Al n.a.; K n.a.; Mg n.a.; Na n.a.; // Share of carbon in waste that is biogenic 0%. // Share of metals in waste not oxidised and bulk-recyclable (exclude very small or thin parts) Iron: 0%; Alu: 0%; Copper: 0%. // One kg of this waste produces 0.02595 kg of slag and 0.03067 kg of residues, which are landfilled. Additional solidification with 0.01227 kg of cement. // Net energy production: 3.23MJ/kg electric energy and 6.34MJ/kg thermal energy. // Recovery of metal scrap to recycling: 0g iron scrap, 0g aluminium scrap, 0g copper scrap.

## Included activities start
waste incineration from waste reception gate and delivery into waste bunker at incinerator plant site (without transports to the incinerator)

## Included activities end
Waste-specific short-term emissions to water from leachate. Long-term emissions from landfill to ground water.

## Technology
average Swiss MSWI plants in 2010 (grate incinerators) with electrostatic precipitator for fly ash (ESP), wet flue gas scrubber and 25% SNCR , 42.77% SCR-high dust , 32.68% SCR-low dust -DeNOx facilities and 0% without Denox (weighted according to mass of burnt waste, representing Swiss average). Efficiency of iron scrap separation from slag : 58%. Efficiency of non-ferrous scrap separation from slag : 31%. Gross electric efficiency technology mix 15.84% and Gross thermal efficiency technology mix 28.51%

## Time period
Waste composition as given in literature reference, theoretical data or other source. Transfer coefficients for modern MSWI.

## Reference product
- heat, for reuse in municipal waste incineration only: 1 MJ; name E_th_prod_MSWI; By-product classification allocatable product; CPC 17300: Steam and hot water; lognormal variance with pedigree 0.018578, pedigree (1,1,1,1,1)
  Net electricity generated from this waste and used in internal MSWI plant energy redistribution.
  production volume 6.90602e9 MJ
    calculated in proportion to reference product waste input to incinerator
  property exergy 0.1842 MJ; name E_th_prod_MSWI_exergy
    This exergy property is based on the exergy content of the product.
  property price 0.0106 EUR2005
    Average European district heat price from Ecoheatcool and Euroheat 2005-2006, Ecoheat Work package 1: The European heat market. Final report. 10.6 EUR/GJ i s the price of district heat. http://www.solarthermalworld.org/files/Ecoheatcool%20WP1%20Web.pdf?download
  property true value relation 0.1842; name E_th_prod_MSWI_true_value_relation
    property to calculate 'true value' from
  properties: carbon allocation 0 kg, carbon content 0

## Inputs from technosphere
- acetic acid, without water, in 98% solution state: 1.43434e-10 kg
- acetylene: 3.23762e-9, 1.53694e-8 kg (2 suppliers, which the file names only by identifier); sum of these 1.8607e-8 kg
- acrylic dispersion, with water, in 58% solution state: 2.78888e-9 kg
- acrylic varnish, with water, in 53% solution state: 9.16347e-10 kg
- acrylonitrile-butadiene-styrene copolymer: 5.56215e-6 kg
- activated carbon, granular: 6.92062e-10 kg
- agricultural trailer: 2.28908e-10 kg
- alkyd paint, white, without solvent, in 60% solution state: 1.51258e-8, 7.1804e-8 kg (2 suppliers, which the file names only by identifier); sum of these 8.69298e-8 kg
- alkyd paint, white, without water, in 60% solution state: 1.57268e-10, 7.4657e-10 kg (2 suppliers, which the file names only by identifier); sum of these 9.03838e-10 kg
- aluminium alloy, AlMg3: 1.39607e-6 kg
- aluminium scrap, new: -1.37828e-6, -1.37828e-6 kg (2 suppliers, which the file names only by identifier); sum of these -2.75655e-6 kg
- aluminium scrap, post-consumer: -2.40709e-6 kg
- aluminium sulfate, powder: 6.55494e-8 kg
- aluminium, cast alloy: 1.7086e-5 kg
- aluminium, wrought alloy: 1.09895e-6 kg
- ammonium sulfate: 1.93683e-11 kg
- bitumen seal: 1.56415e-8 kg
- blower and heat exchange unit, central, 600-1200 m3/h: 3.22748e-13 unit
- brass: 5.32392e-8, 2.67214e-10 kg (2 suppliers, which the file names only by identifier); sum of these 5.35064e-8 kg
- building, hall: 1.1845e-9 m2
- building, hall, steel construction: 1.79885e-8 m2
- cable, unspecified: 2.55918e-7 kg
- cast iron: 2.31671e-5 kg
- cement mortar: 4.83276e-10, 3.84915e-7, 1.93668e-9 kg (3 suppliers, which the file names only by identifier); sum of these 3.87335e-7 kg
- cement, CEM II/B: 2.95664e-7, 7.73788e-8, 4.18146e-6 kg (3 suppliers, which the file names only by identifier); sum of these 4.55451e-6 kg
- cement, CEM III/A: 2.91428e-6, 1.21782e-9, 4.19375e-5, 4.71252e-8 kg (4 suppliers, which the file names only by identifier); sum of these 4.49001e-5 kg
- cement, unspecified: 4.26642e-9, 1.60073e-11, 1.04703e-11, 4.23653e-10, 2.58847e-5, 1.11554e-10, 1.3298e-11, 5.26809e-12, 6.79811e-11, 2.16548e-6 kg (10 suppliers, which the file names only by identifier); sum of these 2.80551e-5 kg
- ceramic tile: 1.78055e-8 kg
- chemical factory, organics: 6.65613e-16 unit
- chemical, organic: 5.16651e-7 kg
- chlorine dioxide: 1.16209e-10 kg
- chlorine, liquid: 2.09633e-9 kg
- chromium steel pipe: 1.13484e-8 kg
- chromium steel removed by turning, average, conventional: 9.85535e-7 kg
- coating powder: 6.16999e-9, 3.0471e-9 kg (2 suppliers, which the file names only by identifier); sum of these 9.21708e-9 kg
- compressed air, 1000 kPa gauge: 6.87927e-7, 2.79931e-7 m3 (2 suppliers, which the file names only by identifier); sum of these 9.67858e-7 m3
- concrete block: 5.10244e-8, 4.02838e-10, 8.89383e-10 kg (3 suppliers, which the file names only by identifier); sum of these 5.23167e-8 kg
- concrete mixing factory: 7.34433e-14 unit
- concrete, normal strength: 7.54512e-11, 1.18303e-13, 1.0777e-11, 1.18453e-8, 1.65687e-11, 7.43652e-8, 1.34135e-10, 5.68842e-9, 3.19515e-10 m3 (9 suppliers, which the file names only by identifier); sum of these 9.24555e-8 m3
- conveyor belt: 6.00247e-10 m
- copper, cathode: 2.05691e-6 kg
- corrugated board box: 9.99636e-8, 2.32026e-7, 3.48843e-8, 3.72365e-9 kg (4 suppliers, which the file names only by identifier); sum of these 3.70597e-7 kg
- diesel: 3.62932e-7 kg
- diesel, burned in agricultural machinery: 2.97406e-6 MJ
- diesel, burned in building machine: 0.000504232 MJ
- diesel, burned in diesel-electric generating set, 18.5kW: 3.68627e-7 MJ
- door, inner, wood: 2.68133e-11 m2
- dust collector, electrostatic precipitator, for industrial use: 2.27783e-14 unit
- electricity, high voltage: 3.51594e-5 kWh
- electricity, low voltage: 4.76963e-8, 9.45229e-8, 9.07993e-7, 1.61972e-8, 1.46167e-8, 3.24514e-7, 2.94553e-9, 2.2494e-7, 6.62392e-8 kWh (9 suppliers, which the file names only by identifier); sum of these 1.69966e-6 kWh
- electricity, medium voltage: 9.52128e-8, 1.28561e-7, 1.84896e-7, 3.85956e-8, 0.000274113, 3.72881e-10, 2.26067e-6, 1.28674e-10, 2.17253e-7, 9.96046e-11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 kWh (104 suppliers, which the file names only by identifier); sum of these 0.000342005 kWh
- electronic component, passive, unspecified: 2.18576e-8 kg
- electronics scrap from control units: -1.56672e-10 kg
- electronics, for control units: 3.51177e-7 kg
- elevator, hydraulic: 1.8558e-12 unit
- energy and auxilliary inputs, metal working factory: 1.06579e-14, 2.37669e-15 kg (2 suppliers, which the file names only by identifier); sum of these 1.30346e-14 kg
- epoxy resin, liquid: 4.69319e-8, 9.88637e-9 kg (2 suppliers, which the file names only by identifier); sum of these 5.68182e-8 kg
- ethoxylated alcohol (AE3): 4.9921e-9 kg
- ethoxylated alcohol (AE7): 4.9921e-9 kg
- ethylene glycol: 5.6715e-7 kg
- ethylene glycol monoethyl ether: 1.22805e-9 kg
- excavation, hydraulic digger: 1.68862e-7 m3
- extrusion of plastic sheets and thermoforming, inline: 2.41525e-7 kg
- extrusion, plastic pipes: 6.76925e-6 kg
- fibre, viscose: 1.38288e-8 kg
- flat glass, coated: 1.50722e-7 kg
- flat glass, uncoated: 1.88957e-7, 9.17597e-7 kg (2 suppliers, which the file names only by identifier); sum of these 1.10655e-6 kg
- furnace, wood chips, with silo, 300kW: 1.67782e-14 unit
- furnace, wood chips, with silo, 5000kW: 2.27782e-14 unit
- glass fibre: 2.98676e-8 kg
- glass fibre reinforced plastic, polyamide, injection moulded: 8.31232e-9 kg
- glass fibre reinforced plastic, polyester resin, hand lay-up: 3.35024e-10 kg
- glass tube, borosilicate: 1.04342e-7 kg
- glass wool mat: 1.23401e-9 kg
- glider, passenger car: 0.00032776 kg
- glued laminated timber, average glue mix: 1.06598e-9, 2.31444e-9 m3 (2 suppliers, which the file names only by identifier); sum of these 3.38042e-9 m3
- gravel, crushed: 8.59315e-8, 6.50842e-5, 0.000258646, 1.30155e-6, 1.42168e-5 kg (5 suppliers, which the file names only by identifier); sum of these 0.000339334 kg
- gravel/sand quarry infrastructure: 2.99808e-13 unit
- ground granulated blast furnace slag: 1.84659e-7 kg
- gypsum plasterboard: 2.66096e-7 kg
- hazardous waste, for incineration: -2.08004e-9 kg
- heat, central or small-scale, other than natural gas: 3.05708e-5, 4.19892e-7 MJ (2 suppliers, which the file names only by identifier); sum of these 3.09907e-5 MJ
- heat, district or industrial, natural gas: 0.000456612, 9.86833e-7, 2.85902e-6, 4.39102e-8 MJ (4 suppliers, which the file names only by identifier); sum of these 0.000460502 MJ
- heat, district or industrial, other than natural gas: 1.03473e-7, 1.3046e-5, 2.12598e-8, 1.42885e-5 MJ (4 suppliers, which the file names only by identifier); sum of these 2.74593e-5 MJ
- hot water tank factory: 7.08523e-15 unit
- hydrochloric acid, without water, in 30% solution state: 7.49825e-11, 3.35761e-10 kg (2 suppliers, which the file names only by identifier); sum of these 4.10743e-10 kg
- industrial machine, heavy, unspecified: 6.00758e-7 kg
- inert waste: -1.15401e-8, -9.93909e-11, -6.22333e-8 kg (3 suppliers, which the file names only by identifier); sum of these -7.38727e-8 kg
- inert waste, for final disposal: -4.91465e-9 kg
- injection moulding: 4.51434e-6 kg
- internal combustion engine, passenger car: 0.000129135 kg
- iron(III) sulfate, without water, in 12.5% iron solution state: 7.7428e-9 kg
- isopropanol: 5.10905e-9 kg
- kraft paper: 3.0231e-7, 3.77484e-8 kg (2 suppliers, which the file names only by identifier); sum of these 3.40058e-7 kg
- lead: 1.69191e-6 kg
- light emitting diode: 8.38145e-11 kg
- lime, hydrated, loose weight: 6.49537e-9 kg
- lime, hydrated, packed: 6.68036e-10, 5.67051e-12 kg (2 suppliers, which the file names only by identifier); sum of these 6.73706e-10 kg
- limestone, crushed, for mill: 4.10354e-8 kg
- lubricating oil: 2.76714e-6, 5.68987e-7 kg (2 suppliers, which the file names only by identifier); sum of these 3.33613e-6 kg
- magnesium: 5.34616e-10 kg
- maintenance, transmission network, electricity, high voltage direct current aerial line: 3.0244e-9 km*year
- maize starch: 4.03099e-10 kg
- manual dismantling of used electric passenger car: 3.01084e-8 unit
- manual dismantling of used passenger car with internal combustion engine: 0.000456867 unit
- medium density fibreboard: 2.4408e-10, 1.5632e-9 m3 (2 suppliers, which the file names only by identifier); sum of these 1.80728e-9 m3
- melamine urea formaldehyde adhesive: 4.56538e-9 kg
- metal working factory: 1.30346e-14 unit
- metal working, average for aluminium product manufacturing: 8.22197e-9 kg
- metal working, average for chromium steel product manufacturing: 1.13484e-8 kg
- metal working, average for steel product manufacturing: 4.80437e-6 kg
- municipal solid waste: -1.00797e-9, -1.4339e-9, -1.23685e-8, -4.40665e-12 kg (4 suppliers, which the file names only by identifier); sum of these -1.48148e-8 kg
- natural stone plate, cut: 4.82288e-10 kg
- nitric acid, without water, in 50% solution state: 2.46063e-9, 6.02485e-11, 3.65611e-9, 9.09207e-9, 1.1824e-8, 4.35644e-9, 1.49833e-8, 7.43458e-12, 3.64258e-9, 5.22469e-11 kg (10 suppliers, which the file names only by identifier); sum of these 5.01351e-8 kg
- nylon 6: 1.90768e-8, 9.42123e-9 kg (2 suppliers, which the file names only by identifier); sum of these 2.8498e-8 kg
- oxygen, liquid: 9.61507e-9, 7.83341e-8 kg (2 suppliers, which the file names only by identifier); sum of these 8.79492e-8 kg
- palladium: 2.43064e-11 kg
- paper, woodfree, coated: 3.2576e-6 kg
- particleboard, uncoated: 4.44654e-9, 2.14814e-9 m3 (2 suppliers, which the file names only by identifier); sum of these 6.59468e-9 m3
- pig iron: 3.00291e-7, 3.2421e-6 kg (2 suppliers, which the file names only by identifier); sum of these 3.54239e-6 kg
- pitch: 2.16859e-11, 1.15081e-10, 3.29828e-9, 1.64289e-10, 1.45137e-8, 5.67255e-11, 2.56738e-9, 9.95327e-10 kg (8 suppliers, which the file names only by identifier); sum of these 2.17325e-8 kg
- platinum: 1.29634e-10 kg
- plywood: 3.36372e-10, 7.15226e-9 m3 (2 suppliers, which the file names only by identifier); sum of these 7.48864e-9 m3
- polyacrylamide: 1.65731e-10 kg
- polyethylene terephthalate, granulate, amorphous: 5.29252e-8 kg
- polyethylene, high density, granulate: 9.61884e-6 kg
- polyethylene, low density, granulate: 6.56791e-8 kg
- polyphenylene sulfide: 2.22809e-6 kg
- polypropylene, granulate: 4.44495e-6 kg
- polystyrene, general purpose: 1.30792e-7 kg
- polyurethane adhesive: 4.09314e-9 kg
- polyurethane, flexible foam: 1.82251e-8, 3.73285e-9 kg (2 suppliers, which the file names only by identifier); sum of these 2.1958e-8 kg
- polyurethane, rigid foam: 1.59376e-7, 3.38358e-7 kg (2 suppliers, which the file names only by identifier); sum of these 4.97733e-7 kg
- polyvinylchloride, bulk polymerised: 1.08723e-6 kg
- polyvinylchloride, emulsion polymerised: 3.27812e-7 kg
- polyvinylchloride, suspension polymerised: 1.22874e-7 kg
- powder coat, steel: 4.91597e-7 m2
- powertrain, for electric passenger car: 2.63041e-9 kg
- printed paper: 3.92375e-8 kg
- printed wiring board, mounted mainboard, desktop computer, Pb free: 1.59273e-9 kg
- printed wiring board, surface mounted, unspecified, Pb free: 1.11419e-8 kg
- printing ink, offset, without solvent, in 47.5% solution state: 2.17252e-8 kg
- propylene glycol, liquid: 3.20053e-8, 1.58061e-8 kg (2 suppliers, which the file names only by identifier); sum of these 4.78114e-8 kg
- recultivation, limestone mine: 8.01592e-9 m2
- refrigeration machine, R134a as refrigerant: 1.97855e-9 unit
- refrigeration machine, carbon dioxide, liquid as refrigerant: 2.17328e-10 unit
- reinforcing steel: 1.83158e-5 kg
- residual softwood, wet: 3.22478e-12 m3
- road: 2.56204e-9 m*year
- road vehicle factory: 1.14634e-14 unit
- sand: 2.92169e-6, 1.5168e-8, 3.4982e-8, 0.000197575 kg (4 suppliers, which the file names only by identifier); sum of these 0.000200547 kg
- sanitary ceramics: 3.26826e-9 kg
- sawlog and veneer log, hardwood, measured as solid wood under bark: 3.91704e-9, 3.683e-10 m3 (2 suppliers, which the file names only by identifier); sum of these 4.28534e-9 m3
- sawlog and veneer log, softwood, measured as solid wood under bark: 6.91674e-10, 7.95855e-11 m3 (2 suppliers, which the file names only by identifier); sum of these 7.71259e-10 m3
- sawnwood, beam, softwood, dried (u=10%), planed: 1.52094e-12 m3
- sawnwood, board, softwood, raw, dried (u=10%): 4.3852e-11, 1.05078e-9 m3 (2 suppliers, which the file names only by identifier); sum of these 1.09464e-9 m3
- sawnwood, hardwood, dried (u=10%), planed: 9.43846e-11, 3.83214e-11 m3 (2 suppliers, which the file names only by identifier); sum of these 1.32706e-10 m3
- scrap aluminium: -7.14897e-7, -3.35413e-8, -1.53024e-6 kg (3 suppliers, which the file names only by identifier); sum of these -2.27868e-6 kg
- scrap copper: -2.72997e-8, -5.81862e-7, -1.22516e-6 kg (3 suppliers, which the file names only by identifier); sum of these -1.83432e-6 kg
- scrap lead acid battery: -4.76767e-7 kg
- scrap steel: -3.39556e-8, -8.37151e-5, -2.68796e-5 kg (3 suppliers, which the file names only by identifier); sum of these -0.000110629 kg
- seal, natural rubber based: 1.46986e-8 kg
- section bar extrusion, aluminium: 1.39607e-6 kg
- section bar rolling, steel: 3.54239e-6 kg
- shed, large, wood, non-insulated, fire-unprotected: 8.65976e-13 m2
- sheet rolling, aluminium: 6.22131e-8 kg
- sheet rolling, chromium steel: 3.44266e-9 kg
- sheet rolling, steel: 1.39939e-6 kg
- silica sand: 1.56865e-9 kg
- sodium chlorate, powder: 1.83044e-8 kg
- sodium hydroxide, without water, in 50% solution state: 2.04164e-7 kg
- sodium hypochlorite, without water, in 15% solution state: 4.40756e-10 kg
- sodium silicate, solid: 1.51155e-9 kg
- sodium tripolyphosphate: 1.16314e-10 kg
- spent activated carbon, granular: -6.713e-10 kg
- spent solvent mixture: -2.52773e-9, -9.87671e-10 kg (2 suppliers, which the file names only by identifier); sum of these -3.5154e-9 kg
- steam, in chemical industry: 5.37144e-8, 3.04655e-7 kg (2 suppliers, which the file names only by identifier); sum of these 3.58369e-7 kg
- steel in car shredder residue: -2.03157e-9 kg
- steel, chromium steel 18/8: 3.44266e-9 kg
- steel, chromium steel 18/8, hot rolled: 1.32176e-5 kg
- steel, low-alloyed: 6.42069e-5 kg
- steel, low-alloyed, hot rolled: 4.91168e-5 kg
- steel, unalloyed: 1.31561e-6 kg
- stone wool, packed: 2.17325e-8 kg
- sulfuric acid: 3.68216e-7, 1.63876e-8 kg (2 suppliers, which the file names only by identifier); sum of these 3.84604e-7 kg
- synthetic rubber: 5.10701e-5 kg
- tap water: 7.85646e-14, 0.00487699, 3.27407e-12, 1.51848e-7, 3.36475e-7, 2.83342e-7, 4.38394e-5, 9.96109e-8, 3.41125e-5, 8.1204e-6 kg (10 suppliers, which the file names only by identifier); sum of these 0.00496394 kg
- tempering, flat glass: 2.51444e-8 kg
- tetrafluoroethylene: 1.73618e-12 kg
- textile, woven cotton: 6.60895e-10 kg
- thermoforming, with calendering: 9.32752e-10 kg
- tractor, 4-wheel, agricultural: 2.77673e-10 kg
- trisodium phosphate: 1.36128e-7 kg
- ultraviolet lamp: 1.83212e-13 unit
- urea formaldehyde resin: 1.69165e-7 kg
- used Li-ion battery: -1.25969e-12 kg
- used Ni-metal hydride battery: -1.53912e-12 kg
- used cable: -2.55918e-7 kg
- used door, inner, wood: -2.68133e-11 m2
- used glider, passenger car: -6.28295e-7 kg
- used intermodal shipping container, 20-foot: -5.48778e-10 unit
- used intermodal shipping container, 40-foot: -1.86366e-10 unit
- used intermodal shipping container, 40-foot, high-cube: -2.6247e-10 unit
- used intermodal shipping container, 45-foot, high-cube: -3.75905e-11 unit
- used internal combustion engine, passenger car: -2.22809e-5 kg
- used lorry with refrigeration machine, 16 metric ton: -2.17325e-9 unit
- used printed wiring boards: -1.11419e-8 kg
- used reefer, intermodal shipping container, 40-foot, high-cube: -2.26321e-11 unit
- used window frame, wood-metal: -1.61898e-10 m2
- waste aluminium: -9.41356e-7 kg
- waste bitumen sheet: -6.14024e-8 kg
- waste bulk iron, excluding reinforcement: -6.01429e-6, -2.89225e-6, -7.55986e-8 kg (3 suppliers, which the file names only by identifier); sum of these -8.98214e-6 kg
- waste concrete: -3.29411e-9, -5.563e-5, -1.23203e-6 kg (3 suppliers, which the file names only by identifier); sum of these -5.68653e-5 kg
- waste concrete, not reinforced: -1.16014e-5, -1.22925e-7, -0.000165572 kg (3 suppliers, which the file names only by identifier); sum of these -0.000177296 kg
- waste electric and electronic equipment: -3.0768e-7 kg
- waste emulsion paint: -6.03963e-10, -5.69321e-11 kg (2 suppliers, which the file names only by identifier); sum of these -6.60895e-10 kg
- waste glass: -3.9527e-8, -9.46807e-8, -1.17922e-6, -8.83357e-9, -1.93258e-6, -1.34143e-8, -9.68108e-6, -2.14799e-9 kg (8 suppliers, which the file names only by identifier); sum of these -1.29515e-5 kg
- waste glass sheet: -1.051e-7, -2.67584e-9, -4.04988e-7 kg (3 suppliers, which the file names only by identifier); sum of these -5.12764e-7 kg
- waste gypsum plasterboard: -2.66096e-7 kg
- waste mineral oil: -2.414e-8, -2.5723e-6, -9.79738e-7 kg (3 suppliers, which the file names only by identifier); sum of these -3.57618e-6 kg
- waste packaging paper: -2.14666e-7, -8.76238e-9, -1.34348e-8, -4.18618e-17, -4.85456e-8, -8.7979e-8, -1.17475e-9, -4.7336e-9 kg (8 suppliers, which the file names only by identifier); sum of these -3.79296e-7 kg
- waste paint on metal: -6.11156e-10, -5.18769e-12 kg (2 suppliers, which the file names only by identifier); sum of these -6.16344e-10 kg
- waste paint on wall: -2.87494e-10 kg
- waste paper, unsorted: -4.57002e-7, -4.57002e-7 kg (2 suppliers, which the file names only by identifier); sum of these -9.14003e-7 kg
- waste paperboard: -1.09271e-9, -7.1268e-10, -1.32929e-7, -7.15569e-9, -1.75734e-8, -3.85003e-10, -3.94841e-9, -9.55473e-11 kg (8 suppliers, which the file names only by identifier); sum of these -1.63892e-7 kg
- waste paperboard, unsorted: -1.03353e-7, -1.03353e-7 kg (2 suppliers, which the file names only by identifier); sum of these -2.06705e-7 kg
- waste plastic, industrial electronics: -4.86235e-11, -3.21851e-9 kg (2 suppliers, which the file names only by identifier); sum of these -3.26713e-9 kg
- waste plastic, mixture: -8.46406e-7, -4.27705e-9, -9.43663e-9, -7.33565e-7, -5.92531e-6, -5.65536e-8, -5.24419e-13, -2.21812e-8, -2.33586e-8 kg (9 suppliers, which the file names only by identifier); sum of these -7.62109e-6 kg
- waste polyethylene: -7.26081e-7, -1.90279e-8, -5.08297e-6, -4.85139e-8, -3.66903e-9, -2.0038e-8, -8.09512e-9, -6.29282e-7 kg (8 suppliers, which the file names only by identifier); sum of these -6.53767e-6 kg
- waste polyethylene/polypropylene product: -1.74531e-7, -6.88448e-8, -2.06585e-9 kg (3 suppliers, which the file names only by identifier); sum of these -2.45442e-7 kg
- waste polypropylene: -4.92625e-9, -3.82947e-7, -2.23277e-9, -3.09322e-6, -1.2194e-8, -2.95229e-8, -1.15794e-8, -4.41854e-7 kg (8 suppliers, which the file names only by identifier); sum of these -3.97847e-6 kg
- waste polystyrene: -3.8067e-10, -1.01689e-7, -1.6195e-10, -1.45259e-8, -4.00877e-10, -7.3402e-11, -9.70562e-10, -1.25893e-8 kg (8 suppliers, which the file names only by identifier); sum of these -1.30792e-7 kg
- waste polyurethane: -1.93992e-11, -1.48255e-9, -1.73999e-9, -8.7925e-12, -1.21809e-8, -1.16259e-10, -4.80193e-11, -4.55988e-11 kg (8 suppliers, which the file names only by identifier); sum of these -1.56415e-8 kg
- waste polyurethane foam: -4.81714e-8, -3.77849e-11 kg (2 suppliers, which the file names only by identifier); sum of these -4.82092e-8 kg
- waste polyvinylchloride: -7.92181e-10, -4.10833e-9, -1.74782e-9, -4.32641e-9, -1.04746e-8, -1.8765e-7, -1.35868e-7, -1.09746e-6 kg (8 suppliers, which the file names only by identifier); sum of these -1.44243e-6 kg
- waste polyvinylchloride product: -1.10573e-9, -9.38092e-8, -3.64552e-8 kg (3 suppliers, which the file names only by identifier); sum of these -1.3137e-7 kg
- waste reinforced concrete: -8.11604e-8, -7.76169e-10, -1.1583e-6 kg (3 suppliers, which the file names only by identifier); sum of these -1.24024e-6 kg
- waste reinforcement steel: -2.45582e-6 kg
- waste rubber, unspecified: -1.3809e-6, -3.29082e-5, -3.29075e-5 kg (3 suppliers, which the file names only by identifier); sum of these -6.71966e-5 kg
- waste wood, post-consumer: -5.3562e-6, -5.37535e-6 kg (2 suppliers, which the file names only by identifier); sum of these -1.07316e-5 kg
- waste wood, untreated: -2.48419e-10, -2.27934e-9, -3.39782e-9, -3.63055e-7, -1.44179e-9, -3.61302e-8, -9.54345e-9, -4.06402e-8 kg (8 suppliers, which the file names only by identifier); sum of these -4.56736e-7 kg
- wastewater from concrete production: -1.10461e-10, -2.28553e-8 m3 (2 suppliers, which the file names only by identifier); sum of these -2.29657e-8 m3
- wastewater from lorry production: -1.11974e-10, -2.31549e-8 m3 (2 suppliers, which the file names only by identifier); sum of these -2.32669e-8 m3
- wastewater from particle board production: -1.31219e-10 m3
- wastewater from plywood production: -1.66924e-10 m3
- wastewater, average: -8.82447e-10, -5.22818e-10, -1.54964e-7, -3.51132e-8 m3 (4 suppliers, which the file names only by identifier); sum of these -1.91482e-7 m3
- wastewater, unpolluted: -6.54344e-9, -2.15165e-6 m3 (2 suppliers, which the file names only by identifier); sum of these -2.15819e-6 m3
- water works, capacity 1.1E10l/year: 1.59241e-15 unit
- water, completely softened: 2.29661e-8, 3.19523e-8, 4.26854e-8 kg (3 suppliers, which the file names only by identifier); sum of these 9.76039e-8 kg
- water, decarbonised: 0.000496727, 3.24952e-6, 0.000421655, 0.000266961, 3.3995e-5, 2.54383e-5 kg (6 suppliers, which the file names only by identifier); sum of these 0.00124802 kg
- welding, arc, steel: 6.05824e-8 m
- white spirit: 7.35598e-9 kg
- window frame, aluminium, U=1.6 W/m2K: 5.5799e-9 m2
- window frame, wood-metal, U=1.6 W/m2K: 1.61898e-10 m2
- wire drawing, copper: 3.64194e-7 kg
- wire drawing, steel: 2.41196e-6 kg
- wood ash mixture, pure: -2.29981e-10, -1.11878e-8 kg (2 suppliers, which the file names only by identifier); sum of these -1.14177e-8 kg
- wood chips, dry, measured as dry mass: 4.97762e-8 kg
- wood preservation, pressure vessel, creosote, outdoor use, ground contact: 4.52254e-9 kg
- wooden board factory, organic bonded boards: 4.44405e-16, 1.01089e-16 unit (2 suppliers, which the file names only by identifier); sum of these 5.45493e-16 unit
- zinc: 4.47147e-8 kg
- zinc coat, coils: 1.03147e-7 m2
- zinc coat, pieces: 3.3835e-7 m2

## Inputs from nature
- Gravel [natural resource, in ground]: 0.00656422 kg
- Occupation, industrial area [natural resource, land]: 1.28376e-7 m2*year
- Occupation, lake, artificial [natural resource, land]: 3.95747e-7 m2*year
- Occupation, mineral extraction site [natural resource, land]: 0.00012785 m2*year
- Occupation, urban, continuously built [natural resource, land]: 9.46963e-8 m2*year
- Sand, unspecified [natural resource, in ground]: 0.00773656 kg
- Transformation, from annual crop [natural resource, land]: 1.76171e-9 m2
- Transformation, from forest, unspecified [natural resource, land]: 6.31569e-7 m2
- Transformation, from pasture, man made [natural resource, land]: 8.26699e-11 m2
- Transformation, from unspecified [natural resource, land]: 2.21542e-7 m2
- Transformation, from urban, green area [natural resource, land]: 1.26262e-9 m2
- Transformation, from wetland, inland (non-use) [natural resource, land]: 6.30163e-7 m2
- Transformation, to industrial area [natural resource, land]: 3.25073e-9 m2
- Transformation, to lake, artificial [natural resource, land]: 3.95747e-8 m2
- Transformation, to mineral extraction site [natural resource, land]: 1.4421e-6 m2
- Transformation, to urban, continuously built [natural resource, land]: 1.26262e-9 m2
- Water, cooling, unspecified natural origin [natural resource, in water]: 2.01315e-8 m3
- Water, lake [natural resource, in water]: 9.2534e-8 m3
- Water, river [natural resource, in water]: 2.6173e-6 m3
- Water, unspecified natural origin [natural resource, in water]: 7.04098e-6 m3
- Water, well, in ground [natural resource, in water]: 6.5301e-5 m3

## Emissions to nature
- 2-Propanol [air, urban air close to ground]: 5.10905e-9 kg
- Acetaldehyde [air, unspecified]: 1.39296e-12 kg
- Acetone [air, unspecified]: 1.93825e-10 kg
- Ammonia [air, unspecified]: 8.79687e-11 kg
- Arsenic ion [air, unspecified]: 2.28355e-14 kg
- Benzene [air, unspecified]: 4.92498e-11 kg
- Benzene, ethyl- [air, unspecified]: 6.85064e-13 kg
- Benzene, ethyl- [air, urban air close to ground]: 2.27095e-10 kg
- Benzene, hexachloro- [air, unspecified]: 1.64415e-19 kg
- Benzo(a)pyrene [air, unspecified]: 1.14177e-14 kg
- Bromine [air, unspecified]: 1.37013e-12 kg
- Cadmium II [air, unspecified]: 1.97445e-14 kg
- Calcium [air, unspecified]: 1.33587e-10 kg
- Carbon dioxide, fossil [air, non-urban air or from high stacks]: 6.29776e-8 kg
- Carbon dioxide, fossil [air, unspecified]: 1.37566e-6 kg
- Carbon dioxide, non-fossil [air, unspecified]: 2.44339e-6 kg
- Carbon monoxide, fossil [air, unspecified]: 2.11457e-9 kg
- Carbon monoxide, non-fossil [air, unspecified]: 4.85763e-9 kg
- Chlorine [air, unspecified]: 4.11038e-12 kg
- Chromium III [air, unspecified]: 7.27189e-13 kg
- Chromium VI [air, unspecified]: 9.13419e-16 kg
- Copper ion [air, unspecified]: 1.13914e-12 kg
- Dinitrogen monoxide [air, unspecified]: 1.01179e-10 kg
- Dioxins, measured as 2,3,7,8-tetrachlorodibenzo-p-dioxin [air, unspecified]: 7.07899e-19 kg
- Fluorine [air, unspecified]: 1.14177e-12 kg
- Formaldehyde [air, unspecified]: 2.63008e-10 kg
- Heat, waste [air, non-urban air or from high stacks]: 6.11614e-10 MJ
- Heptane [air, urban air close to ground]: 2.22173e-9 kg
- Hydrocarbons, aliphatic, alkanes, unspecified [air, unspecified]: 2.07803e-11 kg
- Hydrocarbons, aliphatic, unsaturated [air, unspecified]: 7.07899e-11 kg
- Lead II [air, unspecified]: 5.70928e-13 kg
- Magnesium [air, unspecified]: 8.22077e-12 kg
- Manganese II [air, unspecified]: 3.88203e-12 kg
- Mercury II [air, unspecified]: 6.85814e-15 kg
- Methane, fossil [air, unspecified]: 3.58585e-11 kg
- Methane, non-fossil [air, unspecified]: 3.71585e-11 kg
- Methanol [air, urban air close to ground]: 2.3436e-10 kg
- NMVOC, non-methane volatile organic compounds [air, unspecified]: 1.21391e-7 kg
- Nickel II [air, unspecified]: 1.63309e-13 kg
- Nitrogen oxides [air, unspecified]: 1.81339e-8 kg
- PAH, polycyclic aromatic hydrocarbons [air, unspecified]: 2.53474e-13 kg
- Particulate Matter, < 2.5 um [air, non-urban air or from high stacks]: 2.5247e-12 kg
- Particulate Matter, < 2.5 um [air, unspecified]: 1.18584e-9 kg
- Particulate Matter, > 10 um [air, non-urban air or from high stacks]: 3.53458e-11 kg
- Particulate Matter, > 10 um [air, unspecified]: 2.36884e-11 kg
- Particulate Matter, > 2.5 um and < 10um [air, non-urban air or from high stacks]: 1.26235e-11 kg
- Particulate Matter, > 2.5 um and < 10um [air, unspecified]: 1.55697e-10 kg
- Phenol, pentachloro- [air, unspecified]: 1.84967e-16 kg
- Phosphorus [air, unspecified]: 6.85064e-12 kg
- Potassium I [air, unspecified]: 5.3435e-10 kg
- Propylene oxide [air, urban air close to ground]: 4.26535e-10 kg
- Selenium IV [air, unspecified]: 3.75971e-15 kg
- Sodium [air, unspecified]: 2.96861e-11 kg
- Sulfur dioxide [air, unspecified]: 3.17878e-10 kg
- Toluene [air, unspecified]: 1.88252e-11 kg
- Toluene [air, urban air close to ground]: 2.00612e-10 kg
- Water [air, unspecified]: 4.3894e-6 m3
- Xylene [air, unspecified]: 1.19746e-11 kg
- Xylene [air, urban air close to ground]: 2.00612e-10 kg
- Zinc II [air, unspecified]: 7.22661e-12 kg
- m-Xylene [air, unspecified]: 2.74026e-12 kg
- Oils, unspecified [soil, unspecified]: 2.45327e-7 kg
- Aluminium III [water, unspecified]: 2.49605e-9 kg
- BOD5, Biological Oxygen Demand [water, unspecified]: 8.38265e-10 kg
- COD, Chemical Oxygen Demand [water, unspecified]: 4.4637e-9 kg
- Cadmium II [water, unspecified]: 1.24802e-12 kg
- Chloride [water, unspecified]: 1.10825e-8 kg
- Copper ion [water, unspecified]: 2.49605e-11 kg
- DOC, Dissolved Organic Carbon [water, unspecified]: 1.67154e-9 kg
- Iron ion [water, unspecified]: 3.74407e-11 kg
- Lead II [water, unspecified]: 3.32807e-11 kg
- Manganese II [water, unspecified]: 2.12996e-10 kg
- Nickel II [water, unspecified]: 3.62759e-10 kg
- Phosphate [water, unspecified]: 2.17091e-11 kg
- Sodium I [water, unspecified]: 7.20526e-8 kg
- Sulfate [water, unspecified]: 1.88036e-7 kg
- TOC, Total Organic Carbon [water, unspecified]: 1.67154e-9 kg
- Tin ion [water, unspecified]: 2.08004e-10 kg
- Water [water, unspecified]: 7.30332e-5 m3
- Zinc II [water, unspecified]: 7.48815e-11 kg
