# treatment of sewage sludge, 97% water, WWT, WW from soft fibreboard production, landfarming

Dataset: EcoSpold 2, unit process
Geography: RoW
Time period: 2000-01-01 to 2022-12-31
Technology level: current
Classification: ISIC rev.4 ecoinvent: 3821:Treatment and disposal of non-hazardous waste
Scenario: Business-as-Usual
System model: Allocation at the point of substitution
Generated by: Nikolia Stoikou
Database: ecoinvent
isCopyrightProtected: true

## General comment
The process represents the treatment of a waste (sewage sludge) that is exclusively produced from another waste treatment. Recommended use of this dataset: to be used within the specific chain of treatments for 'wastewater from soft fibreboard production'. Share of biogenic carbon in the sludge: 98.97%.

## Included activities start
The activity starts with the waste being available for landfarming. Collection and transportation of the waste to this process is not included.

## Included activities end
The activity ends with the waste being treated and waste-specific emissions from the landfarming process are released to the environment (air, water and soil). The activity is considering local fate of emissions and the initial specific wastewater composition (generating the sewage sludge). Further, it includes provision of fertiliser functions for N, P, K, if present in the sludge.

## Geography
The site has mean annual temperature (MAT) of 16.743579766537 degC, mean annual precipitation (MAP) of 1250.84108527132 mm/year, mean annual actual evaporation (EAT) of 460.58904958214 mm/year. Climate will influence the local fate emissions based on the elemental composition of the sludge as well as water evaporation to air (= consumptive water use).
References: UN data, 2020. Precipitation, Environment Statistics Database, United Nations Statistics Division Available at: http://data.un.org/Data.aspx?q=precipitation&d=ENV&f=variableID%3a6;
World Bank, 2022. Surface area (sq.km), World Bank Group Available at: https://data.worldbank.org/indicator/AG.SRF.TOTL.K2;
Doka G.,2021. A model for composition-specific life cycle inventories of regionalised wastewater fates, Zurich, Switzerland. http://www.doka.ch/publications.htm

## Technology
Landfarming is the process of spreading a substrate on agricultural soil. Sewage sludge is generated in the wastewater treatment of wastewater from soft fibreboard production. Spreading of liquid sewage sludge (97w% water content) on agricultural fields with mobile vacuum tanker.

## Reference product
- organic phosphorus fertiliser, as P2O5: 1 kg; By-product classification allocatable product; CPC 34659: Fertilizers n.e.c.; lognormal variance with pedigree 0.1825, pedigree (1,1,1,1,1)
  gross fertilizer function provided from sewage sludge spreading on agricultural fields.
  Uncertainty: Uncertainty calculated from upstream wastewater technosphere fate uncertainty, wastewater composition uncertainty, and treatment model uncertainty
  production volume 13.9844 kg
    Calculated in proportion to wastewater reference product.
  property oxygen content 0.563579
    Oxygen content (on a dry matter basis) of organic phosphorus fertiliser, as P2O5 is calculated from the molecular formula of the substance (Phosphorus).
  property phosphorus content 0.436421
    Phosphorus content (on a dry matter basis) of organic phosphorus fertiliser, as P2O5 is calculated from the molecular formula of the substance (Phosphorus).
  property price 0.241 EUR2005
    Set equal to the price of the corresponding inorganic fertiliser
  properties: carbon allocation 0 kg, carbon content 0, carbon content, fossil 0, carbon content, non-fossil 0, dry mass 1 kg, water content 0, water in wet mass 0 kg, wet mass 1 kg

## Inputs from technosphere
- acrylic dispersion, with water, in 58% solution state: 2.08694e-5 kg
- acrylic varnish, with water, in 53% solution state: 6.85709e-6 kg
- aluminium scrap, post-consumer: -0.000436679 kg
- aluminium, wrought alloy: 0.000436679 kg
- chemical, inorganic: 6.55678e-7 kg
- chemical, organic: 6.55678e-7 kg
- chimney: 1.66806e-9 m
- copper scrap, sorted, pressed: -3.94904e-5 kg
- copper, cathode: 4.38782e-5 kg
- corrugated board box: 0.00046058, 0.00106905, 1.71567e-5 kg (3 suppliers, which the file names only by identifier); sum of these 0.00154679 kg
- diesel, low-sulfur: 1.32661e-9, 3.19719e-8, 1.66192e-8, 6.0081e-10, 8.88222e-11, 2.67758e-9, 1.33924e-9 kg (7 suppliers, which the file names only by identifier); sum of these 5.46241e-8 kg
- electricity, low voltage: 0.000356915, 0.000707322, 0.00679458, 0.000121205, 0.00242836, 2.20417e-5, 0.00168324, 0.000495673 kWh (8 suppliers, which the file names only by identifier); sum of these 0.0126093 kWh
- electricity, medium voltage: 2.54417e-5, 7.93862e-6, 0.000340203, 2.36412e-7, 1.20627e-6, 7.28375e-5, 3.98411e-6 kWh (7 suppliers, which the file names only by identifier); sum of these 0.000451847 kWh
- ethylene glycol monoethyl ether: 9.18956e-6 kg
- ethylene vinyl acetate copolymer: 3.6229e-6, 1.58426e-6 kg (2 suppliers, which the file names only by identifier); sum of these 5.20716e-6 kg
- extrusion, plastic film: 3.08179e-5 kg
- hazardous waste, for incineration: -3.04094e-6, -1.2959e-6, -3.3874e-8 kg (3 suppliers, which the file names only by identifier); sum of these -4.37071e-6 kg
- heat, district or industrial, natural gas: 0.000199955, 0.00738455, 0.0199958, 0.000328583 MJ (4 suppliers, which the file names only by identifier); sum of these 0.0279089 MJ
- heavy fuel oil: 4.13803e-7, 3.48197e-9, 1.77017e-8, 2.29529e-8, 4.46685e-9, 5.97955e-9, 2.04821e-7 kg (7 suppliers, which the file names only by identifier); sum of these 6.73207e-7 kg
- industrial furnace, 1MW, oil: 1.25106e-10 unit
- industrial furnace, natural gas: 6.9657e-10 unit
- industrial machine, heavy, unspecified: 3.82314e-6 kg
- isopropanol: 3.82314e-5 kg
- kraft paper: 0.00070166, 0.000325363 kg (2 suppliers, which the file names only by identifier); sum of these 0.00102702 kg
- lead: 7.74322e-5 kg
- light fuel oil: 2.13788e-7, 2.12201e-8, 2.04035e-9, 1.09536e-7, 1.51631e-9, 1.40814e-9, 1.05142e-8 kg (7 suppliers, which the file names only by identifier); sum of these 3.60022e-7 kg
- maintenance, transmission network, electricity, high voltage direct current subsea cable: 1.24389e-7 km*year
- maize starch: 9.67307e-6 kg
- municipal solid waste: -5.68967e-8, -1.76365e-5, -2.04878e-8, -4.02396e-5, -1.43365e-8 kg (5 suppliers, which the file names only by identifier); sum of these -5.79678e-5 kg
- natural gas, high pressure: 3.65693e-8, 1.5436e-8, 8.84063e-8, 2.62356e-8, 1.48417e-6, 1.51694e-7, 1.65586e-8, 4.88622e-10, 5.87972e-8, 6.17441e-8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 m3 (26 suppliers, which the file names only by identifier); sum of these 6.37884e-6 m3
- oil storage, 3000l: 1.5638e-9 unit
- packaging box factory: 1.51812e-12 unit
- packaging film, low density polyethylene: 2.55045e-5 kg
- paper, woodfree, coated: 0.0243769 kg
- polyethylene, high density, granulate: 3.08179e-5 kg
- polypropylene, granulate: 1.01066e-5 kg
- potato starch: 6.65665e-6 kg
- printing ink, offset, without solvent, in 47.5% solution state: 3.52417e-6, 0.00017063 kg (2 suppliers, which the file names only by identifier); sum of these 0.000174154 kg
- scrap copper: -1.96641e-7, -4.19118e-6 kg (2 suppliers, which the file names only by identifier); sum of these -4.38782e-6 kg
- scrap steel: -1.38509e-8, -1.09324e-5 kg (2 suppliers, which the file names only by identifier); sum of these -1.09462e-5 kg
- sheet rolling, aluminium: 0.000436679 kg
- spent solvent mixture: -1.89152e-5, -7.39082e-6 kg (2 suppliers, which the file names only by identifier); sum of these -2.6306e-5 kg
- steel, low-alloyed: 0.000109462 kg
- synthetic rubber: 3.13918e-6 kg
- textile, woven cotton: 4.94553e-6 kg
- thermoforming, with calendering: 6.97986e-6 kg
- waste emulsion paint: -4.5195e-6, -4.26027e-7 kg (2 suppliers, which the file names only by identifier); sum of these -4.94553e-6 kg
- waste paper, unsorted: -1.12386e-5, -0.0034288, -0.00343102 kg (3 suppliers, which the file names only by identifier); sum of these -0.00687105 kg
- waste paperboard, unsorted: -0.000773396, -0.000773396 kg (2 suppliers, which the file names only by identifier); sum of these -0.00154679 kg
- waste plastic, mixture: -1.63158e-7, -8.24469e-10, -1.81906e-9, -5.80581e-7, -1.1422e-6, -1.09016e-8, -4.27578e-9, -4.50275e-9 kg (8 suppliers, which the file names only by identifier); sum of these -1.90826e-6 kg
- waste wire plastic: -1.01066e-5 kg
- white spirit: 5.34888e-5 kg
- wire drawing, copper: 4.38782e-5 kg
- zinc coat, coils: 1.757e-6 m2

## Inputs from nature
- Occupation, seabed, infrastructure [natural resource, land]: 1.36828e-5 m2*year
- Transformation, from seabed, unspecified [natural resource, land]: 3.4207e-7 m2
- Transformation, to seabed, infrastructure [natural resource, land]: 3.4207e-7 m2
- Water, unspecified natural origin [natural resource, in water]: 7.73636e-7 m3

## Emissions to nature
- 2-Propanol [air, urban air close to ground]: 3.82314e-5 kg
- Acetaldehyde [air, urban air close to ground]: 4.34869e-12 kg
- Acetic acid [air, urban air close to ground]: 5.37159e-11 kg
- Acetone [air, urban air close to ground]: 4.09992e-12 kg
- Ammonia [air, urban air close to ground]: 2.92905e-12 kg
- Arsenic ion [air, urban air close to ground]: 3.55326e-13 kg
- Benzene [air, urban air close to ground]: 9.97755e-11 kg
- Benzene, ethyl- [air, urban air close to ground]: 1.69937e-6 kg
- Benzo(a)pyrene [air, urban air close to ground]: 3.7488e-15 kg
- Butane [air, urban air close to ground]: 1.79719e-10 kg
- Calcium [air, urban air close to ground]: 3.00661e-12 kg
- Carbon dioxide, fossil [air, urban air close to ground]: 1.74008e-5 kg
- Carbon monoxide, fossil [air, urban air close to ground]: 7.84576e-10 kg
- Chromium III [air, urban air close to ground]: 1.35297e-13 kg
- Chromium VI [air, urban air close to ground]: 1.36664e-15 kg
- Cobalt II [air, urban air close to ground]: 9.01982e-13 kg
- Copper ion [air, urban air close to ground]: 1.28307e-11 kg
- Dinitrogen monoxide [air, urban air close to ground]: 5.73666e-11 kg
- Dioxins, measured as 2,3,7,8-tetrachlorodibenzo-p-dioxin [air, urban air close to ground]: 2.77302e-20 kg
- Ethanol [air, urban air close to ground]: 8.19984e-12 kg
- Formaldehyde [air, urban air close to ground]: 5.31116e-11 kg
- Heptane [air, urban air close to ground]: 1.66254e-5 kg
- Hydrocarbons, aliphatic, alkanes, unspecified [air, urban air close to ground]: 2.4898e-11 kg
- Hydrocarbons, aliphatic, unsaturated [air, urban air close to ground]: 8.19984e-13 kg
- Hydrocarbons, aromatic [air, urban air close to ground]: 4.63331e-12 kg
- Hydrochloric acid [air, urban air close to ground]: 4.10235e-11 kg
- Hydrogen fluoride [air, urban air close to ground]: 1.47132e-12 kg
- Iron ion [air, urban air close to ground]: 2.24129e-11 kg
- Lead II [air, urban air close to ground]: 3.96326e-12 kg
- Mercury II [air, urban air close to ground]: 2.04156e-14 kg
- Methane, fossil [air, urban air close to ground]: 5.97253e-10 kg
- Methanol [air, urban air close to ground]: 1.75375e-6 kg
- Molybdenum VI [air, urban air close to ground]: 2.18663e-13 kg
- Nickel II [air, urban air close to ground]: 1.3393e-11 kg
- Nitrogen oxides [air, urban air close to ground]: 8.07159e-9 kg
- PAH, polycyclic aromatic hydrocarbons [air, urban air close to ground]: 2.51387e-12 kg
- Particulate Matter, < 2.5 um [air, urban air close to ground]: 2.81121e-10 kg
- Particulate Matter, > 10 um [air, urban air close to ground]: 6.55987e-11 kg
- Particulate Matter, > 2.5 um and < 10um [air, urban air close to ground]: 3.27994e-11 kg
- Pentane [air, urban air close to ground]: 3.02248e-10 kg
- Propane [air, urban air close to ground]: 5.09308e-11 kg
- Propionic acid [air, urban air close to ground]: 4.9755e-12 kg
- Propylene oxide [air, urban air close to ground]: 3.19179e-6 kg
- Selenium IV [air, urban air close to ground]: 3.27994e-13 kg
- Sodium [air, urban air close to ground]: 2.04996e-11 kg
- Sulfur dioxide [air, urban air close to ground]: 1.17352e-8 kg
- Toluene [air, urban air close to ground]: 1.50125e-6 kg
- Vanadium V [air, urban air close to ground]: 2.73328e-11 kg
- Water [air, non-urban air or from high stacks]: 4.61206e-7 m3
- Xylene [air, urban air close to ground]: 1.5012e-6 kg
- Zinc II [air, urban air close to ground]: 1.38966e-11 kg
- BOD5, Biological Oxygen Demand [water, surface water]: 5.44968e-9 kg
- COD, Chemical Oxygen Demand [water, unspecified]: 4.36764e-7 kg
- DOC, Dissolved Organic Carbon [water, unspecified]: 1.61765e-7 kg
- TOC, Total Organic Carbon [water, unspecified]: 1.61765e-7 kg
- Water [water, unspecified]: 3.1243e-7 m3
