# treatment of antimony slag, water-quenched, residual material landfill

Dataset: EcoSpold 2, unit process
Geography: GLO
Time period: 2017-01-01 to 2022-12-31
Technology level: current
Classification: ISIC rev.4 ecoinvent: 3822:Treatment and disposal of hazardous waste
Scenario: Business-as-Usual
System model: Allocation at the point of substitution
Generated by: Avraam Symeonidis
Database: ecoinvent
isCopyrightProtected: true

## General comment
This activity represents the disposal of 'antimony slag, water quentched' in a residual material landfill. This type of landfill is designed to receive mostly inorganic (low carbon, <5 w-%) wastes in a physically stable form. Further information is provided in ecoinvent report no. 13, Part II: Landfills – Underground Deposits – Landfarming (Doka, 2009).
Inventoried waste contains 100% antimony slag, water quentched; .
waste composition (wet, in ppm): H2O n.a.; O 400940; H n.a.; C n.a.; S 5400; N n.a.; P 2662; B n.a.; Cl n.a.; Br n.a.; F n.a.; I n.a.; Ag n.a.; As 5700; Ba n.a.; Cd n.a.; Co 32.6; Cr 213; Cu 139; Hg 2.63; Mn 1084.2; Mo n.a.; Ni 24.7; Pb 51.7; Sb 11100; Se n.a.; Sn 2.74; V n.a.; Zn 665; Be n.a.; Sc n.a.; Sr n.a.; Ti 3236.5; Tl n.a.; W n.a.; Si 188850; Fe 152470; Ca 152950; Al 45145; K 4648.8; Mg 12302; Na 12389;
Share of carbon in waste that is biogenic 0%.
References
Doka, G. (2009). Life cycle inventories of waste treatment services. Ecoinvent report no. 13. Swiss Centre for Life Cycle Inventories, Dubendorf, Switzerland.
Guo, X. et al. (2014) ‘Antimony smelting process generating solid wastes and dust: Characterization and leaching behaviors’, Journal of Environmental Sciences (China). Elsevier B.V., 26(7), pp. 1549–1556. doi: 10.1016/j.jes.2014.05.022.

## Included activities start
Activity starts with the reception of the waste.

## Included activities end
Waste-specific short-term emissions to water from leachate. Long-term emissions from landfill to ground water. Expenditures for solidification with cement.

## Geography
Technology encountered in Switzerland in 2000. Landfill includes base seal and leachate collection system.

## Technology
Residual material landfill for polluted, inorganic waste. With base seal and leachate collection system. Recultivation after closure.

## Reference product
- antimony slag, water-quenched: -1 kg; name RP; By-product classification Waste; CPC 39368: Waste and scrap of antimony and chromium
  production volume 6.4e6 kg
    Calculated based on the production volume of this by-product in the database.
  property aluminium content 0.045145
    The value of 'aluminium content' is documented in literature. Reference available in the respective treatment dataset of residual material landfill for 'antimony slag, water quentched'.
  property antimony content 0.0111
    The value of 'antimony content' is documented in literature. Reference available in the respective treatment dataset of residual material landfill for 'antimony slag, water quentched'.
  property arsenic content 0.0057
    The value of 'arsenic content' is documented in literature. Reference available in the respective treatment dataset of residual material landfill for 'antimony slag, water quentched'.
  property calcium content 0.152946
    The value of 'calcium content' is documented in literature. Reference available in the respective treatment dataset of residual material landfill for 'antimony slag, water quentched'.
  property carbon content, fossil 0
    The value of 'carbon content, fossil' is documented in literature. Reference available in the respective treatment dataset of residual material landfill for 'antimony slag, water quentched'.
  property carbon content, non-fossil 0
    The value of 'carbon content, non-fossil' is documented in literature. Reference available in the respective treatment dataset of residual material landfill for 'antimony slag, water quentched'.
  property chromium content 0.000213
    The value of 'chromium content' is documented in literature. Reference available in the respective treatment dataset of residual material landfill for 'antimony slag, water quentched'.
  property cobalt content 3.26e-5
    The value of 'cobalt content' is documented in literature. Reference available in the respective treatment dataset of residual material landfill for 'antimony slag, water quentched'.
  property copper content 0.000139
    The value of 'copper content' is documented in literature. Reference available in the respective treatment dataset of residual material landfill for 'antimony slag, water quentched'.
  property iron content 0.152469
    The value of 'iron content' is documented in literature. Reference available in the respective treatment dataset of residual material landfill for 'antimony slag, water quentched'.
  property lead content 5.17e-5
    The value of 'lead content' is documented in literature. Reference available in the respective treatment dataset of residual material landfill for 'antimony slag, water quentched'.
  property magnesium content 0.0123022
    The value of 'magnesium content' is documented in literature. Reference available in the respective treatment dataset of residual material landfill for 'antimony slag, water quentched'.
  property manganese content 0.00108423
    The value of 'manganese content' is documented in literature. Reference available in the respective treatment dataset of residual material landfill for 'antimony slag, water quentched'.
  property mercury content 2.63e-6
    The value of 'mercury content' is documented in literature. Reference available in the respective treatment dataset of residual material landfill for 'antimony slag, water quentched'.
  property nickel content 2.47e-5
    The value of 'nickel content' is documented in literature. Reference available in the respective treatment dataset of residual material landfill for 'antimony slag, water quentched'.
  property oxygen content 0.400936
    The value of 'oxygen content' is documented in literature. Reference available in the respective treatment dataset of residual material landfill for 'antimony slag, water quentched'.
  property phosphorus content 0.00266204
    The value of 'phosphorus content' is documented in literature. Reference available in the respective treatment dataset of residual material landfill for 'antimony slag, water quentched'.
  property potassium content 0.00464884
    The value of 'potassium content' is documented in literature. Reference available in the respective treatment dataset of residual material landfill for 'antimony slag, water quentched'.
  property price 0 EUR2005
    Waste products are assigned a price of zero as they are assumed to require further treatment.
  property silicon content 0.18885
    The value of 'silicon content' is documented in literature. Reference available in the respective treatment dataset of residual material landfill for 'antimony slag, water quentched'.
  property sodium content 0.012389
    The value of 'sodium content' is documented in literature. Reference available in the respective treatment dataset of residual material landfill for 'antimony slag, water quentched'.
  property sulfur content 0.0054
    The value of 'sulfur content' is documented in literature. Reference available in the respective treatment dataset of residual material landfill for 'antimony slag, water quentched'.
  property tin content 2.74e-6
    The value of 'tin content' is documented in literature. Reference available in the respective treatment dataset of residual material landfill for 'antimony slag, water quentched'.
  property titanium content 0.00323649
    The value of 'titanium content' is documented in literature. Reference available in the respective treatment dataset of residual material landfill for 'antimony slag, water quentched'.
  property zinc content 0.000665
    The value of 'zinc content' is documented in literature. Reference available in the respective treatment dataset of residual material landfill for 'antimony slag, water quentched'.
  properties: carbon allocation 0 kg, carbon content 0, dry mass 1 kg, water content 0, water in wet mass 0 kg, wet mass 1 kg

## Inputs from technosphere
- process-specific burdens, residual material landfill: 0.280494, 0.71109, 0.00841689 kg (3 suppliers, which the file names only by identifier); sum of these 1 kg; lognormal variance with pedigree 0.082, pedigree (1,1,5,5,4)
  demands per kilogram waste. uncertainty is heeded in the module
- residual material landfill: 2.08333e-9 unit; lognormal variance with pedigree 0.082, pedigree (1,1,5,5,4)
  demands per kilogram waste. uncertainty is heeded in the module

## Emissions to nature
- Aluminium III [water, ground-, long-term]: 0.0134014 kg; lognormal variance with pedigree 0.648787, pedigree (1,1,5,5,4)
  uncertainty is calculated from uncertainties in waste composition and transfer coefficients in incinerator and landfills.
- Aluminium III [water, surface water]: 2.2373e-5 kg; lognormal variance with pedigree 1.02448, pedigree (1,1,5,5,4)
  uncertainty is calculated from uncertainties in waste composition and transfer coefficients in residual landfill
- Antimony ion [water, ground-, long-term]: 0.00718549 kg; lognormal variance with pedigree 0.442369, pedigree (1,1,5,5,4)
  (same comment as for Aluminium III)
- Antimony ion [water, surface water]: 0.00391451 kg; lognormal variance with pedigree 0.466519, pedigree (1,1,5,5,4)
  (same comment as for Aluminium III)
- Arsenic ion [water, ground-, long-term]: 5.7e-12 kg; lognormal variance with pedigree 0.541414, pedigree (1,1,5,5,4)
  (same comment as for Aluminium III)
- Arsenic ion [water, surface water]: 0.0057 kg; lognormal variance with pedigree 0.517777, pedigree (1,1,5,5,4)
  (same comment as for Aluminium III)
- Calcium II [water, ground-, long-term]: 0.0138199 kg; lognormal variance with pedigree 1.6123, pedigree (1,1,5,5,4)
  (same comment as for Aluminium III)
- Calcium II [water, surface water]: 2.30716e-5 kg; lognormal variance with pedigree 1.0687, pedigree (1,1,5,5,4)
  (same comment as for Aluminium III)
- Chromium VI [water, ground-, long-term]: 4.0446e-5 kg; lognormal variance with pedigree 0.950115, pedigree (1,1,5,5,4)
  (same comment as for Aluminium III)
- Chromium VI [water, surface water]: 1.2804e-5 kg; lognormal variance with pedigree 1.11117, pedigree (1,1,5,5,4)
  (same comment as for Aluminium III)
- Cobalt II [water, ground-, long-term]: 5.5734e-6 kg; lognormal variance with pedigree 1.97312, pedigree (1,1,5,5,4)
  (same comment as for Aluminium III)
- Cobalt II [water, surface water]: 9.30451e-9 kg; lognormal variance with pedigree 2.01014, pedigree (1,1,5,5,4)
  (same comment as for Aluminium III)
- Copper ion [water, ground-, long-term]: 5.35074e-6 kg; lognormal variance with pedigree 3.65259, pedigree (1,1,5,5,4)
  (same comment as for Aluminium III)
- Copper ion [water, surface water]: 8.93279e-9 kg; lognormal variance with pedigree 2.01431, pedigree (1,1,5,5,4)
  (same comment as for Aluminium III)
- Iron ion [water, ground-, long-term]: 0.000764171 kg; lognormal variance with pedigree 7.17951, pedigree (1,1,5,5,4)
  (same comment as for Aluminium III)
- Iron ion [water, surface water]: 1.27574e-6 kg; lognormal variance with pedigree 1.4511, pedigree (1,1,5,5,4)
  (same comment as for Aluminium III)
- Lead II [water, ground-, long-term]: 2.68173e-7 kg; lognormal variance with pedigree 8.0529, pedigree (1,1,5,5,4)
  (same comment as for Aluminium III)
- Lead II [water, surface water]: 4.47702e-10 kg; lognormal variance with pedigree 2.41063, pedigree (1,1,5,5,4)
  (same comment as for Aluminium III)
- Magnesium [water, ground-, long-term]: 0.00139781 kg; lognormal variance with pedigree 1.60726, pedigree (1,1,5,5,4)
  (same comment as for Aluminium III)
- Magnesium [water, surface water]: 2.33358e-6 kg; lognormal variance with pedigree 1.29563, pedigree (1,1,5,5,4)
  (same comment as for Aluminium III)
- Manganese II [water, ground-, long-term]: 8.95606e-6 kg; lognormal variance with pedigree 6.48018, pedigree (1,1,5,5,4)
  (same comment as for Aluminium III)
- Manganese II [water, surface water]: 1.49517e-8 kg; lognormal variance with pedigree 1.94662, pedigree (1,1,5,5,4)
  (same comment as for Aluminium III)
- Mercury II [water, ground-, long-term]: 1.24141e-7 kg; lognormal variance with pedigree 3.85622, pedigree (1,1,5,5,4)
  (same comment as for Aluminium III)
- Mercury II [water, surface water]: 2.07246e-10 kg; lognormal variance with pedigree 2.51264, pedigree (1,1,5,5,4)
  (same comment as for Aluminium III)
- Nickel II [water, ground-, long-term]: 8.94233e-6 kg; lognormal variance with pedigree 1.48809, pedigree (1,1,5,5,4)
  (same comment as for Aluminium III)
- Nickel II [water, surface water]: 1.49288e-8 kg; lognormal variance with pedigree 1.9485, pedigree (1,1,5,5,4)
  (same comment as for Aluminium III)
- Phosphate [water, ground-, long-term]: 0.00182354 kg; lognormal variance with pedigree 1.17442, pedigree (1,1,5,5,4)
  (same comment as for Aluminium III)
- Phosphate [water, surface water]: 3.0443e-6 kg; lognormal variance with pedigree 1.39496, pedigree (1,1,5,5,4)
  (same comment as for Aluminium III)
- Potassium I [water, ground-, long-term]: 0.0033384 kg; lognormal variance with pedigree 0.546919, pedigree (1,1,5,5,4)
  (same comment as for Aluminium III)
- Potassium I [water, surface water]: 0.00131044 kg; lognormal variance with pedigree 0.585224, pedigree (1,1,5,5,4)
  (same comment as for Aluminium III)
- Silicon [water, ground-, long-term]: 0.188425 kg; lognormal variance with pedigree 0.15149, pedigree (1,1,5,5,4)
  (same comment as for Aluminium III)
- Silicon [water, surface water]: 0.000424713 kg; lognormal variance with pedigree 0.700203, pedigree (1,1,5,5,4)
  (same comment as for Aluminium III)
- Sodium I [water, ground-, long-term]: 0.00773968 kg; lognormal variance with pedigree 0.429889, pedigree (1,1,5,5,4)
  (same comment as for Aluminium III)
- Sodium I [water, surface water]: 0.00464933 kg; lognormal variance with pedigree 0.450347, pedigree (1,1,5,5,4)
  (same comment as for Aluminium III)
- Sulfate [water, ground-, long-term]: 0.0144619 kg; lognormal variance with pedigree 0.525283, pedigree (1,1,5,5,4)
  (same comment as for Aluminium III)
- Sulfate [water, surface water]: 0.00173807 kg; lognormal variance with pedigree 0.638542, pedigree (1,1,5,5,4)
  (same comment as for Aluminium III)
- Tin ion [water, ground-, long-term]: 5.19211e-8 kg; lognormal variance with pedigree 5.45244, pedigree (1,1,5,5,4)
  (same comment as for Aluminium III)
- Tin ion [water, surface water]: 8.66796e-11 kg; lognormal variance with pedigree 2.6281, pedigree (1,1,5,5,4)
  (same comment as for Aluminium III)
- Titanium ion [water, ground-, long-term]: 0.000960759 kg; lognormal variance with pedigree 0.95724, pedigree (1,1,5,5,4)
  (same comment as for Aluminium III)
- Titanium ion [water, surface water]: 1.60394e-6 kg; lognormal variance with pedigree 1.33293, pedigree (1,1,5,5,4)
  (same comment as for Aluminium III)
- Zinc II [water, ground-, long-term]: 8.15024e-6 kg; lognormal variance with pedigree 5.63683, pedigree (1,1,5,5,4)
  (same comment as for Aluminium III)
- Zinc II [water, surface water]: 1.36064e-8 kg; lognormal variance with pedigree 1.95852, pedigree (1,1,5,5,4)
  (same comment as for Aluminium III)

## Sampling procedure
The waste composition was derived from literature and is given in the general comment. The unit process was created with a landfill model that is based on observed leachate concentrations in literature. The model extrapolates to 60'000 years while considering chemical characteristics.

Reference for the model:
Doka G. (2009) Life Cycle Inventories of Waste Treatment Services. ecoinvent report No. 13. Swiss Centre for Life Cycle Inventories, Dübendorf, 2009. Doka Life Cycle Assessments, Zurich, Switzerland. Available at http://www.doka.ch/publications.htm

## Review by Gabor Doka 2021-01-05
Passed.
