# electricity, high voltage, import from GT

Dataset: EcoSpold 2, unit process
Geography: MX
Time period: 2012-01-01 to 2022-12-31
Technology level: current
Classification: ISIC rev.4 ecoinvent: 3510:Electric power generation, transmission and distribution
Scenario: Business-as-Usual
System model: Allocation at the point of substitution
Generated by: Karin Treyer
Database: ecoinvent
isCopyrightProtected: true

## General comment
This dataset represents the amount of imported electricity from a specific geography to this country.

## Included activities start
This activity represents the point of 'handing over' the electricity from one country to the other at the border.

## Included activities end
This dataset doesn't include any electricity losses or transmission infrastructure as these are accounted for in the market datasets.

## Time period
Annual production volume valid for 2012.

## Reference product
- electricity, high voltage: 1 kWh; By-product classification allocatable product; CPC 17100: Electrical energy
  production volume 4.85572e8 kWh
    Literature value. Where available, data are taken from the OECD iLibrary, database 'Electricity imports by origin'. However, this database only lists imports from OECD countries and neglects imports from non-OECD countries. To determine these imports, the total import volume to this country was taken from the IEA electricity statistics 2014. The origin country Guatemala is a best guess in this case.
    OECD. 2014. IEA Electricity Information Statistics: OECD - Electricity imports by origin. OECD iLibrary. Online database. DOI : 10.1787/elect-data-en
    IEA. 2014. Electricity Information 2014. ISBN 978-92-64-21692-1. International Energy Agency (IEA), Paris Cedex (FR).
  property price 0.0977 EUR2005
    Temporary price data. Calculated as 90% of purchasers price based on: 94% of the average price (to account for a 6% loss in transformation and transmission) for electricity for industrial consumersin 2005 (excluded taxes). From IEA.
  properties: carbon allocation 0 kg, carbon content 0

## Inputs from technosphere
- electricity, high voltage: 1 kWh
  activityLink added to better reflect the reality of the supply chain
