# treatment of sewage sludge, 75% water, WWT, WW from LCD backlight production, sanitary landfill

Dataset: EcoSpold 2, unit process
Geography: GLO
Time period: 1994-01-01 to 2022-12-31
Technology level: current
Classification: ISIC rev.4 ecoinvent: 3821:Treatment and disposal of non-hazardous waste
Scenario: Business-as-Usual
System model: Allocation at the point of substitution
Generated by: Nikolia Stoikou
Database: ecoinvent
isCopyrightProtected: true

## General comment
The process represents the treatment of a waste (sewage sludge) that is exclusively generated from another waste treatment. Sewage sludge is generated in the wastewater treatment of 'wastewater from LCD backlight production'. Recommended use of this dataset: to be used within the specific chain of treatments for 'wastewater from LCD backlight production'. Share of biogenic carbon in the sludge: 0%. Landfill gas capture and utilisation generates 0.03321 kWh of electricity and 0.0599 MJ of useful heat. 0.002598 kg waste mass remains in the landfill even after the long term period. "LCD" stands for "Liquid-crystal display".

## Included activities start
The activity starts with the waste being available at the gate of the treatment facility. Collection and transportation of the waste to the treatment plant is not included.

## Included activities end
The activity ends with the waste being treated and waste-specific emissions from the landfill are released to the environment (air due to landfil gas and water due to landfil leachate).

## Geography
Landfill site with mean annual temperature (MAT) of 16.743579766537 degC, mean annual precipitation (MAP) of 1250.84108527132 mm/year, and net infiltration of 790.252035689178 mm/year.The leachate percolating through the landfill has an average residence time of 6.33 years.
References: UN data, 2020. Precipitation, Environment Statistics Database, United Nations Statistics Division Available at: http://data.un.org/Data.aspx?q=precipitation&d=ENV&f=variableID%3a6;
World Bank, 2022. Surface area (sq.km), World Bank Group Available at: https://data.worldbank.org/indicator/AG.SRF.TOTL.K2;
Doka G.,2021. A model for composition-specific life cycle inventories of regionalised wastewater fates, Zurich, Switzerland. http://www.doka.ch/publications.htm

## Technology
Sanitary (controlled) landfill for municipal solid waste. Ultimate average landfill height is 20 meters. Operation phase duration is 30 years. The total raw landfill gas mass produced in the landfill from this waste is 0.1386 kg. The total CH4 mass in the raw landfill gas is 0.07738 kg. Percentage of landfill gas directly emitted is 47w%. Percentage of landfill gas captured and flared is 18.02w%. Percentage of landfill gas captured and utilised is 34.98%. Conversion efficiencies are 27.8e% for electricity and 13.5e% for useful heat. Leachate generated during the first 100 years is collected and treated region-specifically before emission. Based on average waste composition and climate data the end of carbonate phase is estimated to be reached 2'863 years after waste deposition.

## Reference product
- heat, district or industrial, other than natural gas: 1 MJ; By-product classification allocatable product; CPC 17300: Steam and hot water; lognormal variance with pedigree 0.11404, pedigree (1,1,1,1,1)
  Net production of heat from landfill gas utilisation.
  Uncertainty: Uncertainty calculated depending on waste input and uncertainty of transfer coefficients in landfill to landfill gas, uncertainty in gas capture and utilisation.
  production volume 0.00327804 MJ
    Calculated from the production volume of the reference product in proportion to the respective output amounts.
  property corresponding fuel use, propane, furnace >100kW 0 MJ; name fuel_use
    Lower heating value of the fuel input related to the heat/electricity output, taken directly from ecoinvent v3.0 dataset "heat production, natural gas, at industrial furnace >100kW, GLO 2000".
  property price 0.0106 EUR2005
    Average European district heat price from Ecoheatcool and Euroheat 2005-2006, Ecoheat Work package 1: The European heat market. Final report. 10.6 EUR/GJ i s the price of district heat. http://www.solarthermalworld.org/files/Ecoheatcool%20WP1%20Web.pdf?download
  properties: carbon allocation 0 kg, carbon content 0, carbon content, fossil 0, carbon content, non-fossil 0, dry mass 1 kg, heating value, net 1 MJ, water content 0, water in wet mass 0 kg, wet mass 1 kg

## Inputs from technosphere
- aluminium, wrought alloy: 7.81265e-6 kg
- argon, liquid: 1.43244e-9, 6.79996e-9 kg (2 suppliers, which the file names only by identifier); sum of these 8.23239e-9 kg
- cable, ribbon cable, 20-pin, with plugs: 7.9992e-7 kg
- chemical, inorganic: 4.88597e-8 kg
- chemical, organic: 6.52538e-8 kg
- copper, cathode: 1.5882e-7 kg
- diethyl ether, without water, in 99.95% solution state: 1.76473e-8, 3.9951e-9 kg (2 suppliers, which the file names only by identifier); sum of these 2.16424e-8 kg
- electricity, medium voltage: 0.000288928 kWh
- ethanol, without water, in 99.7% solution state, from ethylene: 3.34646e-9, 7.45152e-9 kg (2 suppliers, which the file names only by identifier); sum of these 1.0798e-8 kg
- glass tube, borosilicate: 9.6551e-6 kg
- hazardous waste, for incineration: -1.06187e-6, -5.10651e-7, -1.33481e-8 kg (3 suppliers, which the file names only by identifier); sum of these -1.58587e-6 kg
- hazardous waste, for underground deposit: -5.89394e-11, -3.79643e-12 kg (2 suppliers, which the file names only by identifier); sum of these -6.27358e-11 kg
- heat, district or industrial, natural gas: 8.83045e-8 MJ
- inert waste, for final disposal: -2.29692e-12, -3.52815e-10 kg (2 suppliers, which the file names only by identifier); sum of these -3.55112e-10 kg
- krypton, gaseous: 1.47158e-8 kg
- lead: 2.48842e-7 kg
- lead in car shredder residue: -2.83571e-13, -1.87701e-11 kg (2 suppliers, which the file names only by identifier); sum of these -1.90537e-11 kg
- mercury: 9.30531e-10 kg
- polycarbonate: 2.65863e-5 kg
- polyethylene terephthalate, granulate, amorphous: 6.39018e-6 kg
- polymethyl methacrylate, sheet: 0.000176543 kg
- printed wiring board mounting facility: 4.89939e-11 unit
- spent activated carbon with mercury: -2.15024e-13 kg
- steel, chromium steel 18/8, hot rolled: 5.87692e-6 kg
- synthetic rubber: 1.40163e-7 kg
- waste paperboard: -2.82996e-11, -1.84574e-11, -3.44266e-9, -1.85322e-10, -4.55126e-10, -9.97103e-12, -1.02258e-10, -2.47454e-12 kg (8 suppliers, which the file names only by identifier); sum of these -4.24457e-9 kg
- waste plastic, industrial electronics: -5.32636e-9, -3.52565e-7 kg (2 suppliers, which the file names only by identifier); sum of these -3.57891e-7 kg
- waste polyethylene: -2.58753e-8, -6.78098e-10, -1.81141e-7, -1.72889e-9, -1.30753e-10, -7.14092e-10, -2.88485e-10, -2.24257e-8 kg (8 suppliers, which the file names only by identifier); sum of these -2.32983e-7 kg
- waste polypropylene: -7.85473e-10, -6.10595e-8, -3.56008e-10, -4.93203e-7, -1.9443e-9, -4.70733e-9, -1.84629e-9, -7.0452e-8 kg (8 suppliers, which the file names only by identifier); sum of these -6.34354e-7 kg
- wastewater from liquid crystal display backlight production: -1.07748e-7, -2.22811e-5 m3 (2 suppliers, which the file names only by identifier); sum of these -2.23888e-5 m3

## Inputs from nature
- Water, unspecified natural origin [natural resource, in water]: 4.47776e-5 m3

## Emissions to nature
- Diethyl ether [air, urban air close to ground]: 2.15957e-8 kg
- Ethanol [air, urban air close to ground]: 1.0798e-8 kg
- Nitrogen oxides [air, urban air close to ground]: 6.80992e-6 kg
- Water [air, unspecified]: 2.73144e-6 m3
- Water [water, unspecified]: 1.96574e-5 m3
