# treatment of waste paint, municipal incineration

Dataset: EcoSpold 2, unit process
Geography: CH
Time period: 1994-01-01 to 2022-12-31
Technology level: outdated
Classification: ISIC rev.4 ecoinvent: 3821:Treatment and disposal of non-hazardous waste
Classification: EcoSpold01Categories: waste management/municipal incineration
Tags: ConvertedDataset; Treatment
Scenario: Business-as-Usual
System model: Allocation at the point of substitution
Generated by: Gabor Doka
Published in: Doka G. 2007
Database: ecoinvent
isCopyrightProtected: true

## General comment
Inventoried waste contains 100% paint (remains); .
waste composition (wet, in ppm): upper heating value 10.86 MJ/kg; lower heating value 10.14 MJ/kg; H2O n.a.; O 290300; H 36288; C 651510; S n.a.; N n.a.; P n.a.; B n.a.; Cl 1600; Br n.a.; F n.a.; I n.a.; Ag n.a.; As 2.5; Ba n.a.; Cd 5.0622; Co 388.23; Cr 1040.7; Cu 59; Hg 0.6; Mn n.a.; Mo 38.619; Ni 15; Pb 15246; Sb n.a.; Se n.a.; Sn 256.78; V n.a.; Zn 3251.5; Be n.a.; Sc n.a.; Sr n.a.; Ti n.a.; Tl n.a.; W n.a.; Si n.a.; Fe n.a.; Ca n.a.; Al n.a.; K n.a.; Mg n.a.; Na n.a.;
Share of carbon in waste that is biogenic 0%.
Share of iron in waste that is metallic/recyclable 0%.
Net energy produced in MSWI: 0.8MJ/kg waste electric energy and 1.75MJ/kg waste thermal energy
Allocation of energy production: no substitution or expansion. Total burden allocated to waste disposal function of MSWI.
One kg of this waste produces 0.007538 kg of slag and 0.02274 kg of residues, which are landfilled. Additional solidification with 0.009095 kg of cement.
[This dataset was already contained in the ecoinvent database version 2. It was not individually updated during the transfer to ecoinvent version 3. Life Cycle Impact Assessment results may still have changed, as they are affected by changes in the supply chain, i.e. in other datasets. This dataset was generated following the ecoinvent quality guidelines for version 2. It may have been subject to central changes described in the ecoinvent version 3 change report (http://www.ecoinvent.org/database/ecoinvent-version-3/reports-of-changes/), and the results of the central updates were reviewed extensively. The changes added e.g. consistent water flows and other information throughout the database. The documentation of this dataset can be found in the ecoinvent reports of version 2, which are still available via the ecoinvent website. The change report linked above covers all central changes that were made during the conversion process.]

## Included activities end
waste-specific air and water emisions from incineration, auxiliary material consumption for flue gas cleaning. Short-term emissions to river water and long-term emisisons to ground water from slag compartment (from bottom slag) and residual material landfill (from solidified fly ashes and scrubber slugde). Process energy demands for MSWI.

## Geography
Specific to the technology mix encountered in Switzerland in 2000. Well applicable to modern incineration practices in Europe, North America or Japan.

## Technology
average Swiss MSWI plants in 2000 with electrostatic precipitator for fly ash (ESP), wet flue gas scrubber and 29.4% SNCR , 32.2% SCR-high dust , 24.6% SCR-low dust -DeNOx facilities and 13.8% without Denox (by burnt waste, according to Swiss average). Share of waste incinerated in plants with magnetic scrap separation from slag : 50%. Gross electric efficiency technology mix 12.997% and Gross thermal efficiency technology mix 25.57%

## Time period
Waste composition as given in literature reference, theoretical data or other source. Transfer coefficients for modern Swiss MSWI. Emission speciation based on early 90ies data.

## Reference product
- waste paint: -1 kg; name WP; By-product classification Waste; CPC 39: Wastes or scraps
  EcoSpold01Location=CH
  production volume 0 kg
    outdated
  property carbon content, fossil 0.65
    Tab A.5, ecoinvent v2.2 report 13_I. C content has been calculated after data in the tables, and then referred to 1 kg DM
  property heating value, net 19.7 MJ
    LHV is calculated based on the Carbon content of the product. More details can be found on the respective documentation.
  property price 0 EUR2005
    Waste products are assigned a price of zero as they are assumed to require further treatment.
  properties: carbon allocation 0.65 kg, carbon content 0.65, carbon content, non-fossil 0, dry mass 1 kg, water content 0, water in wet mass 0 kg, wet mass 1 kg

## Inputs from technosphere
- cement, unspecified: 0.0091 kg; lognormal variance with pedigree 0.18, pedigree (1,1,5,1,1)
  Cement for solidification of landfilled residual material. Uncertainty calculated from unertainty of the waste composition of this waste, of transfer coefficients in the incinerator and of the solidification recipe.
  EcoSpold01Location=CH
  properties: dry mass 1 kg, wet mass 1 kg
- chemical, inorganic: 1.19e-5 kg; lognormal variance with pedigree 0.23, pedigree (1,1,5,1,1)
  EcoSpold01Location=GLO
  Proxy for Polyelectrolyte. uncertainty calculated from uncertainty in average auxiliary material input, and the unertainty of the waste composition of this waste
  properties: carbon content, fossil 0.003, dry mass 1 kg, wet mass 1 kg
  note on carbon content, fossil: This dataset is an unweighted average of 20 inorganic substances (listed in Tab 88.1, ecoinvent v2.2 report 8, part II), being part of the top100 chemicals included in this database. The C-content has also been calculated as an unweighted average of the C content of the substances composing this dataset.
- chemical, organic: 2.15e-5 kg; lognormal variance with pedigree 1.31, pedigree (1,1,5,1,1)
  EcoSpold01Location=GLO
  Proxy for TMT15. uncertainty calculated from uncertainty in average auxiliary material input, and the unertainty of the waste composition of this waste
  properties: carbon content, fossil 0.628, dry mass 1 kg, heating value, net 19.03 MJ, wet mass 1 kg
  note on carbon content, fossil: This dataset is an unweighted average of 20 organic substances (listed in Tab 88.1, ecoinvent v2.2 report 8, part II), being part of the top100 chemicals included in this database. The C-content has also been calculated as an unweighted average of the C content of the substances composing this dataset.
- hydrochloric acid, without water, in 30% solution state: 7.15e-6 kg; lognormal variance with pedigree 0.23, pedigree (1,1,5,1,1)
  uncertainty calculated from uncertainty in average auxiliary material input, and the unertainty of the waste composition of this waste
  EcoSpold01Location=RER
  properties: dry mass 1 kg, heating value, net 3.32 MJ, wet mass 1 kg
- iron (III) chloride, without water, in 40% solution state: 0.00115 kg; lognormal variance with pedigree 0.25, pedigree (1,1,5,1,1)
  EcoSpold01Location=CH
  uncertainty calculated from uncertainty in average auxiliary material input, and the unertainty of the waste composition of this waste
  properties: dry mass 1 kg, wet mass 1 kg
- municipal waste incineration facility: 2.5e-10 unit; lognormal variance with pedigree 0.04, pedigree (1,1,5,1,1)
  demands per kilogram waste. uncertainty is heeded in the module
  EcoSpold01Location=CH
- process-specific burdens, municipal waste incineration: 1 kg; lognormal variance with pedigree 0.04, pedigree (1,1,5,1,1)
  demands per kilogram waste. uncertainty is heeded in the module;activityLink introduced to establish a direct link to the corresponding regional supply of this product
  EcoSpold01Location=CH
- process-specific burdens, residual material landfill: 0.0227 kg; lognormal variance with pedigree 0.17, pedigree (1,1,5,1,1)
  uncertainty is calculated from uncertainties in waste composition and transfer coefficients in incinerator;activityLink introduced to establish a direct link to the corresponding regional supply of this product
  EcoSpold01Location=CH
- process-specific burdens, slag landfill: 0.00754 kg; lognormal variance with pedigree 0.06, pedigree (1,1,5,1,1)
  EcoSpold01Location=CH
  uncertainty is calculated from uncertainties in waste composition and transfer coefficients in incinerator;activityLink introduced to establish a direct link to the corresponding regional supply of this product
- quicklime, milled, packed: 0.000276 kg; lognormal variance with pedigree 0.64, pedigree (1,1,5,1,1)
  uncertainty calculated from uncertainty in average auxiliary material input, and the unertainty of the waste composition of this waste
  EcoSpold01Location=CH
  properties: dry mass 0.99 kg, water content 0.010101, wet mass 1 kg
- residual material landfill: 4.74e-11 unit; lognormal variance with pedigree 0.17, pedigree (1,1,5,1,1)
  EcoSpold01Location=CH
  uncertainty is calculated from uncertainties in waste composition and transfer coefficients in incinerator
- slag landfill: 1.34e-11 unit; lognormal variance with pedigree 0.06, pedigree (1,1,5,1,1)
  (same comment as for residual material landfill)
- sodium hydroxide, without water, in 50% solution state: 0.00156 kg; lognormal variance with pedigree 0.64, pedigree (1,1,5,1,1)
  EcoSpold01Location=RER
  uncertainty calculated from uncertainty in average auxiliary material input, and the unertainty of the waste composition of this waste
  properties: dry mass 1 kg, heating value, net 3.03 MJ, wet mass 1 kg
- waste cement, hydrated: -0.0227 kg; name BP_WS; lognormal variance with pedigree 0.14, pedigree (1,1,1,1,1)
  EcoSpold01Location=CH
  Hydrated cement for solidification of landfilled residual material. Uncertainty calculated from unertainty of the waste composition of this waste and transfer coefficients in the incinerator and of the solidification recipe.
  production volume
    Calculated based on the relative output of the reference and by products.
  properties: dry mass 1 kg, wet mass 1 kg

## Emissions to nature
- Arsenic ion [air, urban air close to ground]: 2.55e-14 kg; lognormal variance with pedigree 1.6, pedigree (1,1,5,1,1)
  uncertainty is calculated from uncertainties in waste composition and transfer coefficients in incinerator
- Cadmium II [air, urban air close to ground]: 2.79e-10 kg; lognormal variance with pedigree 1.43, pedigree (1,1,5,1,1)
  (same comment as for Arsenic ion)
- Carbon dioxide, fossil [air, urban air close to ground]: 2.36 kg; lognormal variance with pedigree 0.05, pedigree (1,1,5,1,1)
  (same comment as for Arsenic ion)
- Carbon monoxide, fossil [air, urban air close to ground]: 0.000223 kg; lognormal variance with pedigree 0.690625, pedigree (1,3,5,2,1)
  Literature data from switzerland and germany adapted to plant age distribution in switzerland
  Uncertainty: & basic uncertainty of 5; literature data from switzerland and germany adapted to plant age distribution in switzerland
- Chromium III [air, urban air close to ground]: 7.7e-11 kg; lognormal variance with pedigree 0.79, pedigree (1,1,5,1,1)
  (same comment as for Arsenic ion)
- Cobalt II [air, urban air close to ground]: 1.23e-11 kg; lognormal variance with pedigree 0.92, pedigree (1,1,5,1,1)
  (same comment as for Arsenic ion)
- Copper ion [air, urban air close to ground]: 4.36e-10 kg; lognormal variance with pedigree 1.12, pedigree (1,1,5,1,1)
  (same comment as for Arsenic ion)
- Hydrochloric acid [air, urban air close to ground]: 1.78e-8 kg; lognormal variance with pedigree 0.69, pedigree (1,1,5,1,1)
  (same comment as for Arsenic ion)
- Lead II [air, urban air close to ground]: 5.66e-7 kg; lognormal variance with pedigree 0.4, pedigree (1,1,5,1,1)
  (same comment as for Arsenic ion)
- Mercury II [air, urban air close to ground]: 2.07e-14 kg; lognormal variance with pedigree 1.78, pedigree (1,1,5,1,1)
  (same comment as for Arsenic ion)
- Methane, fossil [air, urban air close to ground]: 6.38e-6 kg; lognormal variance with pedigree 0.091225, pedigree (2,3,5,2,1)
  Confidential data from 5 plants in Switzerland and Germany
  Uncertainty: & basic uncertainty of 1.5; confidential data from 5 plants in Switzerland and Germany
- Molybdenum VI [air, urban air close to ground]: 7.72e-8 kg; lognormal variance with pedigree 1.14, pedigree (1,1,5,1,1)
  (same comment as for Arsenic ion)
- Nickel II [air, urban air close to ground]: 6.47e-13 kg; lognormal variance with pedigree 1.36, pedigree (1,1,5,1,1)
  (same comment as for Arsenic ion)
- Tin ion [air, urban air close to ground]: 3.41e-7 kg; lognormal variance with pedigree 0.89, pedigree (1,1,5,1,1)
  (same comment as for Arsenic ion)
- Zinc II [air, urban air close to ground]: 5.31e-8 kg; lognormal variance with pedigree 0.59, pedigree (1,1,5,1,1)
  (same comment as for Arsenic ion)
- Arsenic ion [water, ground-, long-term]: 1.37e-6 kg; lognormal variance with pedigree 1.49, pedigree (1,1,5,1,1)
  Long-term emissions from landfilling of incineration residues. uncertainty is calculated from uncertainties in waste composition and transfer coefficients in incinerator and landfills.
- Arsenic ion [water, surface water]: 1.13e-6 kg; lognormal variance with pedigree 1.25, pedigree (1,1,5,1,1)
  uncertainty is calculated from uncertainties in waste composition and transfer coefficients in incinerator and landfills
- BOD5, Biological Oxygen Demand [water, ground-, long-term]: 0.00526 kg; lognormal variance with pedigree 0.05, pedigree (1,1,5,1,1)
  (same comment as for Arsenic ion)
- BOD5, Biological Oxygen Demand [water, surface water]: 2.44e-5 kg; lognormal variance with pedigree 0.16, pedigree (1,1,5,1,1)
  (same comment as for Arsenic ion)
- COD, Chemical Oxygen Demand [water, ground-, long-term]: 0.0161 kg; lognormal variance with pedigree 0.05, pedigree (1,1,5,1,1)
  (same comment as for Arsenic ion)
- COD, Chemical Oxygen Demand [water, surface water]: 4.35e-5 kg; lognormal variance with pedigree 0.28, pedigree (1,1,5,1,1)
  (same comment as for Arsenic ion)
- Cadmium II [water, ground-, long-term]: 5.08e-8 kg; lognormal variance with pedigree 7.15, pedigree (1,1,5,1,1)
  (same comment as for Arsenic ion)
- Cadmium II [water, surface water]: 2.3e-9 kg; lognormal variance with pedigree 1.36, pedigree (1,1,5,1,1)
  (same comment as for Arsenic ion)
- Chloride [water, ground-, long-term]: 3.78e-5 kg; lognormal variance with pedigree 0.31, pedigree (1,1,5,1,1)
  (same comment as for Arsenic ion)
- Chloride [water, surface water]: 0.00156 kg; lognormal variance with pedigree 0.58, pedigree (1,1,5,1,1)
  (same comment as for Arsenic ion)
- Chromium III [water, surface water]: 3.32e-6 kg; lognormal variance with pedigree 0.71, pedigree (1,1,5,1,1)
  (same comment as for Arsenic ion)
- Chromium VI [water, ground-, long-term]: 0.00011 kg; lognormal variance with pedigree 0.96, pedigree (1,1,5,1,1)
  (same comment as for Arsenic ion)
- Chromium VI [water, surface water]: 3.39e-5 kg; lognormal variance with pedigree 0.7, pedigree (1,1,5,1,1)
  (same comment as for Arsenic ion)
- Cobalt II [water, ground-, long-term]: 0.00034 kg; lognormal variance with pedigree 0.78, pedigree (1,1,5,1,1)
  (same comment as for Arsenic ion)
- Cobalt II [water, surface water]: 6.64e-8 kg; lognormal variance with pedigree 1.3, pedigree (1,1,5,1,1)
  (same comment as for Arsenic ion)
- Copper ion [water, ground-, long-term]: 4.77e-5 kg; lognormal variance with pedigree 1.04, pedigree (1,1,5,1,1)
  (same comment as for Arsenic ion)
- Copper ion [water, surface water]: 2.4e-9 kg; lognormal variance with pedigree 1.68, pedigree (1,1,5,1,1)
  (same comment as for Arsenic ion)
- DOC, Dissolved Organic Carbon [water, ground-, long-term]: 0.00636 kg; lognormal variance with pedigree 0.05, pedigree (1,1,5,1,1)
  (same comment as for Arsenic ion)
- DOC, Dissolved Organic Carbon [water, surface water]: 1.79e-5 kg; lognormal variance with pedigree 0.27, pedigree (1,1,5,1,1)
  (same comment as for Arsenic ion)
- Lead II [water, ground-, long-term]: 0.00109 kg; lognormal variance with pedigree 6.5, pedigree (1,1,5,1,1)
  (same comment as for Arsenic ion)
- Lead II [water, surface water]: 4.25e-7 kg; lognormal variance with pedigree 0.61, pedigree (1,1,5,1,1)
  (same comment as for Arsenic ion)
- Mercury II [water, ground-, long-term]: 3.12e-8 kg; lognormal variance with pedigree 3.44, pedigree (1,1,5,1,1)
  (same comment as for Arsenic ion)
- Mercury II [water, surface water]: 6.42e-9 kg; lognormal variance with pedigree 1.64, pedigree (1,1,5,1,1)
  (same comment as for Arsenic ion)
- Molybdenum VI [water, ground-, long-term]: 3.19e-5 kg; lognormal variance with pedigree 1.13, pedigree (1,1,5,1,1)
  (same comment as for Arsenic ion)
- Molybdenum VI [water, surface water]: 6.6e-6 kg; lognormal variance with pedigree 0.71, pedigree (1,1,5,1,1)
  (same comment as for Arsenic ion)
- Nickel II [water, ground-, long-term]: 1.4e-5 kg; lognormal variance with pedigree 1.2, pedigree (1,1,5,1,1)
  (same comment as for Arsenic ion)
- Nickel II [water, surface water]: 9.41e-9 kg; lognormal variance with pedigree 1.83, pedigree (1,1,5,1,1)
  (same comment as for Arsenic ion)
- TOC, Total Organic Carbon [water, ground-, long-term]: 0.00636 kg; lognormal variance with pedigree 0.05, pedigree (1,1,5,1,1)
  (same comment as for Arsenic ion)
- TOC, Total Organic Carbon [water, surface water]: 1.79e-5 kg; lognormal variance with pedigree 0.27, pedigree (1,1,5,1,1)
  (same comment as for Arsenic ion)
- Tin ion [water, ground-, long-term]: 0.000129 kg; lognormal variance with pedigree 1.27, pedigree (1,1,5,1,1)
  (same comment as for Arsenic ion)
- Tin ion [water, surface water]: 9.53e-9 kg; lognormal variance with pedigree 1.06, pedigree (1,1,5,1,1)
  (same comment as for Arsenic ion)
- Zinc II [water, ground-, long-term]: 5.04e-5 kg; lognormal variance with pedigree 5.21, pedigree (1,1,5,1,1)
  (same comment as for Arsenic ion)
- Zinc II [water, surface water]: 5.98e-7 kg; lognormal variance with pedigree 0.51, pedigree (1,1,5,1,1)
  (same comment as for Arsenic ion)

## Sampling procedure
waste-specific calculation based on literature data

## Extrapolations
Typical elemental transfer coefficients from current studies for modern MSWI, completed with data from coal power plants and estimates, adapted for inert/burnable waste.

## Review by Niels Jungbluth 2003-07-15
Passed. Calculation for standard deviation 95 of, i.e., infrastructure,
land occupation, transport services or other services can differ from
standard Pedigree approach used in this project and figures obtained by
this procedure.

## Review by Tereza Levova 2015-03-27
Real production volume added for the ecoinvent v3.2. release.

## Review by Emilia Moreno Ruiz 2015-10-16
PV adjusted
