# photovoltaic plant construction, 570kWp, multi-Si, on open ground

Dataset: EcoSpold 2, unit process
Geography: GLO
Time period: 2008-01-01 to 2022-12-31
Technology level: current
Classification: ISIC rev.4 ecoinvent: 4220:Construction of utility projects
Synonyms: multi-crystalline; silicon; polycrystalline
Tags: infrastructure; photovoltaic power
Scenario: Business-as-Usual
System model: Allocation at the point of substitution
Generated by: Jungbluth Niels
Published in: Jungbluth N. 2012
Database: ecoinvent
isCopyrightProtected: true

## General comment
This dataset represents the installation of a photovoltaic power plant with a capacity of 570 kWp and a life time of 30 years installed in 2008 on an average location on the world. The plant consists out of the following infrastructure parts (represented by unit processes in the database):
- Technology: multi-Si (mc-Si) panel
- open ground mounting structure
- 500 kW inverter
- 570kWp electric installation

Source of the image: Edisun Power Europe Ltd. 2012. Our facilities. Spain. Solarpark El Tesoro, 568.9 kWp. Alcolea del Rio (Andalusia) 2008. http://www.edisunpower.com/en/home-en/about_edisun_power/our-facilities/spain/solarpark-el-tesoro-en (accessed 23.01.2012)

## Included activities start
This dataset starts from the purchase of the needed components for the photovoltaic open ground power plant.

## Included activities end
This activity ends with the installation of the power plant.

This dataset includes all components for the installation of a 570 kWp open ground photovoltaic plant (modules, mounting system, electric installation, inverter, fence) and the energy use for mounting.

This dataset doesn't include any end of life treatment as this is included in the underlying datasets. This dataset doesn't include any land use as this is already considered in the mounting system dataset.

## Geography
This dataset is based on a photovoltaic open ground power plant in Spain.

## Technology
Current technology for mounting of panels or laminates, electric installations and other components.

Technical data of the 570 kWp PV plant this dataset is based on:
-Source: Questionnaire filled by Edisun Power AG, Spain
-Mounting system: open ground
-annual electricity produced: 847.5 MWh
-Area of installed modules (m2):4273.5
-No lightning protection
- Fuse box weight: not known
- Cabling PV area (m): 5170
- Cabling panels to inverter (m): 1200
-Cabling in-verter to elec-tric meter (m): not known

The construction process for an open ground power plant is the following: First, the area is measured with a laser, potential test piling is carried out and the foundation profiles are positioned. Then the foundation profiles are piled or screwed into the ground and the heights are levelled. Finally, the rest of the system is mounted and the panels are fixed.

## Parameters
- Installed capacity: 5490 MW; name capacity_installed_2008; lognormal variance with pedigree 0.0562, pedigree (4,2,1,3,3)
  Literature value. New installed capacity of photovoltaic power in 2008. Valid for grid-connected new capacity. [IEA. 2009. Trends in Photovoltaic Applications:Survey report of selected IEA countries between1992 and 2008. International Energy Agency (IEA), Report IEA-PVPS T1-18:2009, Paris Cedex (FR)]
- Share 570kWp open ground installation, multi-Si, on open ground: 0.351918 dimensionless; name pv_570ogi_mSi_og; lognormal variance with pedigree 0.1782, pedigree (4,5,2,5,5)
  Literature value, calculated value. The shares of the different types of cells and mounting systems are taken from Jungbluth N. et al. (2012)and adapted for GLO for open ground PV plants. According to IEA (2009), there were 35.19% grid-connected centralized PV power plants globally. It is assumed that all centralized PV power plants are open ground plants.
  Sources:
  - Jungbluth N., Stucki M., Flury K., Frischknecht R. and Buesser S. (2012) Life Cycle Inventories of Photovoltaic Power Production. ESU-services Ltd., Uster, CH, retrieved from: www.esu-services.ch/data/public-lci-reports/ <http://www.esu-services.ch/data/public-lci-reports
  - IEA. 2009. Trends in Photovoltaic Applications:Survey report of selected IEA countries between1992 and 2008. International Energy Agency (IEA), Report IEA-PVPS T1-18:2009, Paris Cedex (FR)
- panel exchange rate and loss: 0.03 dimensionless; name panel_loss; lognormal variance with pedigree 0.0192, pedigree (3,2,3,3,3)
  Estimation. For the PV panels a 2% replacement of damaged modules during the lifetime plus a further production loss during handling of 1% is assumed here.

## Reference product
- photovoltaic plant, 570kWp, multi-Si, on open ground: 1 unit; By-product classification allocatable product; CPC 53262: Power plants
  EcoSpold01Location=ES
  production volume 3389.52 unit
    Calculated value. See parameters for details.
  property capacity 570 kWp; name capacity
    capacity of photovoltaic cells in kWp.
  property price 2.23624e6 EUR2005
    Calculated based on inputs: The price of the product has been calculated as a sum of the values of the material and energy inputs for this product. This value is therefore a rough estimation. It may underestimate the real price since there are additional expenses when producing any product. These expences can include for example labour costs, treatment of waste materials and profit for the producer. Please consider carefully whether this level of data quality is acceptable for your application.
  properties: carbon allocation 0 kg, carbon content 0, lifetime 30 year

## Inputs from technosphere
- diesel, burned in building machine: 7673 MJ; source Mason J. M. 2006; lognormal variance with pedigree 0.0692, pedigree (3,4,5,1,1)
  Literature value/extrapolation. Energy use for foundation piling and wheel loader. Data based on data for a 3.5 MW power plant, reported by Mason et al. (2006).
  EcoSpold01Location=GLO
  properties: heating value, net 1 MJ
- electricity, low voltage: 36.033 kWh; source Jungbluth N. 2012, p. 99; lognormal variance with pedigree 0.0694, pedigree (3,4,5,1,1)
  EcoSpold01Location=ES
  Literature value/calculated value. The energy consumption for the erection of the mounting system is taken into account, scaled from a 3kWp plant over capacity.
  Uncertainty: scaled from a 3kWp plant over capacity
- inverter, 500kW: 3.126 unit; source Jungbluth N. 2012; lognormal variance with pedigree 0.0752, pedigree (2,4,5,1,1)
  Calculated value. The lifetime of the inverter is assumed with 15 years. Thus, it must be exchanged once during the lifetime of the plant. The amount of inverter materials is approximated with a 500 kW inverter with adjusted inverter weights.
  EcoSpold01Location=RER
  properties: lifetime 15 year
- photovoltaic mounting system, for 570kWp open ground module: 4273.5 m2; name panel_area; source Edisun Power AG 2006; lognormal variance with pedigree 0.0406, pedigree (1,1,5,1,1)
  Measured value/Calculated value. The total area of PV modules used in the large PV power plants is not calculated from the cell efficiency, but corresponds to the actual situation at the power plants investigated.
  EcoSpold01Location=RER
- photovoltaic panel, multi-Si wafer: 4401.7 m2; = panel_area*(1+ panel_loss); source Jungbluth N. 2012; lognormal variance with pedigree 0.044, pedigree (3,4,5,1,1)
  EcoSpold01Location=RER
  Calculated value.
- photovoltaics, electric installation for 570kWp module, open ground: 1 unit; source Jungbluth N. 2012; lognormal variance with pedigree 0.1887, pedigree (3,4,5,1,1)
  EcoSpold01Location=ES
  properties: lifetime 30 year

## Sampling procedure
Partly confidential data of a questionnaire filled in by the operator of a 570 kWp power plant in Spain (Edisun Power AG). There were commented two 570 kWp photovoltaic power plants by Edisun Power AG with nearly identical properties and performance. One of them was chosen as reference plant.

## Review by Bo Weidema 2012-02-01
As an exception, this dataset has only been reviewed by two reviewers. This can be justified by the limited number of exchanges with the environment of such an infrastructure dataset.

## Review by Christian Bauer 2012-02-01
passed
