# treatment of waste polyethylene, for recycling, unsorted, sorting

Dataset: EcoSpold 2, unit process
Geography: RoW
Time period: 2010-01-01 to 2022-12-31
Technology level: current
Classification: ISIC rev.4 ecoinvent: 3811:Collection of non-hazardous waste
Scenario: Business-as-Usual
System model: Allocation at the point of substitution
Generated by: Thomas Kägi
Published in: Kägi T. 2017
Database: ecoinvent
isCopyrightProtected: true

## General comment
This dataset was built as a weighted average of regional datasets of the same activityName. Weights are based on production volumes.
Europe without Switzerland: production volume = 3e+09 kg/year, weight = 0.7656
US: production volume = 9e+08 kg/year, weight = 0.2321
CH: production volume = 9e+06 kg/year, weight = 0.002304

## Included activities start
Service is starting with the receipt of unsorted waste PE

## Included activities end
This module includes all processes of the sorting of waste PE up to the factory gate. Machinery infrastructure is excluded

## Allocation
no allocation involved

## Geography
This dataset is a weighted average built from the following geographies: Europe without Switzerland, US, CH.

## Reference product
- waste polyethylene, for recycling, sorted: 1 kg; name BP_amount_1; By-product classification Recyclable; CPC 39270: Waste, parings and scrap of plastics; lognormal variance with pedigree 0.0026, pedigree (1,1,1,5,1)
  production volume 2.68438e8 kg
    PVs of by-products/waste are scaled according to their relationship with the reference product.
  property price 0.035 EUR2005
    Convert from EU 27 price to the world by currency exchange rate.
  properties: carbon allocation 0.824026 kg, carbon content 0.829, carbon content, fossil 0.829, carbon content, non-fossil 0, dry mass 0.994 kg, heating value, net 42.47 MJ, water content 0.00603622, water in wet mass 0.006 kg, wet mass 1 kg

## Inputs from technosphere
- aluminium, cast alloy: 5.90969e-5 kg
- carton board box production, with offset printing: 0.000711138 kg
- electricity, medium voltage: 0.00352087, 6.40133e-7, 7.59372e-6, 0.00745145, 8.807e-6, 4.33116e-6, 6.89685e-6, 8.55667e-6, 1.79621e-6, 5.89277e-7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 kWh (31 suppliers, which the file names only by identifier); sum of these 0.0270663 kWh
- extrusion of plastic sheets and thermoforming, inline: 3.16015e-6 kg
- extrusion, plastic film: 0.0101326 kg
- fish canning plant: 2.49958e-12, 4.58053e-12 unit (2 suppliers, which the file names only by identifier); sum of these 7.08011e-12 unit
- fish curing plant: 1.16918e-11, 2.87178e-11 unit (2 suppliers, which the file names only by identifier); sum of these 4.04096e-11 unit
- fish freezing plant: 1.48211e-10, 6.60305e-11 unit (2 suppliers, which the file names only by identifier); sum of these 2.14241e-10 unit
- heat, district or industrial, natural gas: 0.000566292, 0.000230554 MJ (2 suppliers, which the file names only by identifier); sum of these 0.000796846 MJ
- heat, district or industrial, other than natural gas: 0.0106993, 0.0196066 MJ (2 suppliers, which the file names only by identifier); sum of these 0.0303058 MJ
- metal working, average for chromium steel product manufacturing: 0.000327239 kg
- nitrogen, liquid: 1.7562e-7, 3.17381e-8 kg (2 suppliers, which the file names only by identifier); sum of these 2.07358e-7 kg
- packaging film, low density polyethylene: 3.20664e-6 kg
- packaging glass, white: 0.000155518 kg
- polyethylene terephthalate, granulate, amorphous: 2.10246e-5 kg
- polyethylene, high density, granulate: 3.87109e-6 kg
- polyethylene, low density, granulate: 0.0101319 kg
- scrap aluminium: -1.33222e-5, -6.25045e-7, -4.51497e-5 kg (3 suppliers, which the file names only by identifier); sum of these -5.90969e-5 kg
- scrap tin sheet: -4.94741e-5, -0.00505545 kg (2 suppliers, which the file names only by identifier); sum of these -0.00510492 kg
- sheet rolling, aluminium: 5.90969e-5 kg
- sodium chloride, powder: 0.0264815 kg
- thermoforming of plastic sheets: 2.10246e-5 kg
- tin plated chromium steel sheet, 2 mm: 0.000327239 m2
- vegetable oil, refined: 0.00336367 kg
- waste packaging glass, unsorted: -0.000155518 kg
- waste polyethylene, for recycling, unsorted: -0.00175522, -0.00489114, -0.00175522, -0.00175522 kg (4 suppliers, which the file names only by identifier); sum of these -0.0101568 kg
- wastewater from vegetable oil refinery: -0.00139086 m3
- water, completely softened: 0.355649, 0.494809, 1.46517 kg (3 suppliers, which the file names only by identifier); sum of these 2.31563 kg

## Emissions to nature
- BOD5, Biological Oxygen Demand [water, unspecified]: 8.21638e-7 kg
- COD, Chemical Oxygen Demand [water, unspecified]: 5.11944e-6 kg
- DOC, Dissolved Organic Carbon [water, unspecified]: 1.30619e-6 kg
- Nitrogen [water, unspecified]: 1.74895e-5 kg
- Oils, non-fossil [water, ocean]: 5.75159e-5 kg
- Phosphorus [water, unspecified]: 5.31225e-6 kg
- TOC, Total Organic Carbon [water, unspecified]: 1.30619e-6 kg

## Sampling procedure
Uncertainty estimation according to the pedigree matrix

## Review by Ivan Muñoz Ortiz 2017-08-10
An offline review in excel has been carried out for all the PE recycling activities, checking mass balances, data sources, etc. Several comments were made to the data provider and improvements have been made to the datasets.
