# recultivation, shale quarry

Dataset: EcoSpold 2, unit process
Geography: GLO
Time period: 2014-01-01 to 2022-12-31
Technology level: current
Classification: EcoSpold01Categories: construction materials/additives
Classification: ISIC rev.4 ecoinvent: 3900:Remediation activities and other waste management services
Synonyms: Renaturierung
Scenario: Business-as-Usual
System model: Allocation at the point of substitution
Generated by: Catherine Reid
Database: ecoinvent
isCopyrightProtected: true

## General comment
The dataset represents the recultivation of a shale quarry. Rough estimate extrapolated fom recultivation, limestone mine dataset (ecoinvent v3).
If possible, this dataset should be improved with more specific information.

Comment taken from recultivation, limestone mine dataset (ecoinvent v3) :
The ratio of topsoil (assumed density: 1'400 kg/m3, thickness: 0.3 m, weight: 420 kg/m2, ) to extracted limestone (density: 2'300 kg/m3, thickness: 70m, weight: 160'000 kg/m2) is about 0.26%. The diesel fuel used for covering the closed mine is thus calculated using this ratio compared to its requirement during operation of the mine.

## Included activities end
Includes only transformation from mineral extraction site to forest and the diesel consumption.

## Geography
data are only from one company in Switzerland (KFN)

## Technology
Extrapolated from a medium size Swiss limesonte mine, with a topsoil thickness 30 cm.

## Time period
dataset based on approximation only, therefore data entry si the reference year

## Reference product
- recultivation, shale quarry: 1 m2; By-product classification allocatable product; CPC 9441: Site remediation and clean-up services
  production volume 4 m2
    This is a placeholder value that does not reflect real-world production volumes. This dataset does not currently require a real-world production volume to work in the database framework, and no actual data were collected yet. This has no negative effect on the results of the ecoinvent database.
  property price 0.139872 EUR2005
    Calculated based on inputs: The price of the product has been calculated as a sum of the values of the material and energy inputs for this product. This value is therefore a rough estimation. It may underestimate the real price since there are additional expenses when producing any product. These expences can include for example labour costs, treatment of waste materials and profit for the producer. Please consider carefully whether this level of data quality is acceptable for your application.
  properties: carbon allocation 0 kg, carbon content 0

## Inputs from technosphere
- diesel, burned in building machine: 7.44 MJ; lognormal variance with pedigree 0.53, pedigree (5,5,5,5,5)
  EcoSpold01Location=GLO
  Extrapolated from recultivation, limestone mine dataset (ecoinvent v3).
  Uncertainty: rough estimation
  properties: heating value, net 1 MJ

## Inputs from nature
- Transformation, from mineral extraction site [natural resource, land]: 1 m2; lognormal variance with pedigree 0.33, pedigree (5,5,5,5,5)
  Extrapolated from recultivation, limestone mine dataset (ecoinvent v3).
  Uncertainty: rough estimation
- Transformation, to forest, unspecified [natural resource, land]: 1 m2; lognormal variance with pedigree 0.33, pedigree (5,5,5,5,5)
  (same comment as for Transformation, from mineral extraction site)

## Sampling procedure
Rough estimation

## Extrapolations
This dataset has been copied from an original dataset covering the geography CH, for recultivation, limestone mine (2000-2002). The uncertainty has been adjusted accordingly.
