# treatment of waste paperboard, municipal incineration with fly ash extraction

Dataset: EcoSpold 2, unit process
Geography: CH
Time period: 2006-01-01 to 2022-12-31
Technology level: current
Classification: ISIC rev.4 ecoinvent: 3821:Treatment and disposal of non-hazardous waste
Synonyms: municipal waste incineration
Scenario: Business-as-Usual
System model: Allocation at the point of substitution
Share of production covered: 1.8 %
Generated by: Gabor Doka
Published in: Doka G. 2015
Database: ecoinvent
isCopyrightProtected: true

## General comment
This dataset represents the activity of waste disposal of waste paperboard in a municipal solid waste incinerator (MSWI) // Recommended use of this dataset: For cardboard, which goes to disposal as part of communal waste mixture. Larger amounts of separated cardboard will likely not be disposed in incinerators or landfills, but rather go to recycling. // // Waste composition (wet, in ppm): upper heating value 17.91 MJ/kg; lower heating value 15.92 MJ/kg; H2O 104370; O 392680; H 57791; C 433270; S 1776.8; N 2583.5; P n.a.; B n.a.; Cl 7173.3; Br n.a.; F n.a.; I n.a.; Ag n.a.; As 1.168; Ba 57.193; Cd 0.93313; Co 0.91806; Cr 9.2403; Cu 35.113; Hg 0.30131; Mn 95.196; Mo n.a.; Ni 10.64; Pb 28.963; Sb 0.0046044; Se 3.1073; Sn 6.7521; V n.a.; Zn 63.333; Be 1.1299; Sc n.a.; Sr 45.009; Ti n.a.; Tl n.a.; W n.a.; Si n.a.; Fe n.a.; Ca n.a.; Al n.a.; K n.a.; Mg n.a.; Na n.a.; // Share of carbon in waste that is biogenic 100%. // Share of metals in waste not oxidised and bulk-recyclable (exclude very small or thin parts) Iron: 0%; Alu: 0%; Copper: 0%. // Recovery of metal scrap from bottom ash to recycling: 0g iron scrap, 0g aluminium scrap, 0g copper scrap. From this waste, the FLUWA process in the technology mix recovers 0.000607kg (DM) of a hydroxide sludge to be recycled in zinc furnaces. // Ultimately one kg of this waste produces 0.01404 kg of bottom ash (can include some washed ash) and 0.003829 kg of residues, which are landfilled (technology mix). Additional solidification of residues with 0.001532 kg of cement.Net energy production: 2MJ/kg electric energy and 3.99MJ/kg thermal energy. //

## Included activities start
waste incineration from waste reception gate and delivery into waste bunker at incinerator plant site (without transports to the incinerator)

## Included activities end
Waste-specific short-term emissions to water from leachate. Long-term emissions from landfill to ground water.

## Geography
Specific to the technology mix encountered in Switzerland in 2012.

## Technology
average Swiss MSWI plants in 2010 (grate incinerators) with electrostatic precipitator for fly ash (ESP), wet flue gas scrubber and 25% SNCR , 42.77% SCR-high dust , 32.68% SCR-low dust -DeNOx facilities and 0% without Denox (weighted according to mass of burnt waste, representing Swiss average). Efficiency of iron scrap separation from slag : 58%. Efficiency of non-ferrous scrap separation from slag : 31%. The technology mix for this dataset includes a filter ash treatment (FLUWA) of a share of 46.22%. Gross electric efficiency technology mix 15.84% and Gross thermal efficiency technology mix 28.51%

## Time period
Waste composition as given in literature reference, theoretical data or other source. Transfer coefficients for modern MSWI.

## Reference product
- heat, for reuse in municipal waste incineration only: 1 MJ; name E_th_prod_MSWI; By-product classification allocatable product; CPC 17300: Steam and hot water; lognormal variance with pedigree 0.062091, pedigree (1,1,1,1,1)
  Net useful heat generated from this waste and used in internal MSWI plant energy redistribution.
  Uncertainty: uncertainty is calculated from uncertainties in waste composition and uncertainties in energy efficiency and the uncertainty in internal energy demand
  production volume 5.6747e8 MJ
    calculated in proportion to reference product waste input to incinerator
  property exergy 0.1842 MJ; name E_th_prod_MSWI_exergy
    This exergy property is based on the exergy content of the product.
  property price 0.0106 EUR2005
    Average European district heat price from Ecoheatcool and Euroheat 2005-2006, Ecoheat Work package 1: The European heat market. Final report. 10.6 EUR/GJ i s the price of district heat. http://www.solarthermalworld.org/files/Ecoheatcool%20WP1%20Web.pdf?download
  property true value relation 0.1842; name E_th_prod_MSWI_true_value_relation
    property to calculate "true value" from
  properties: carbon allocation 0 kg, carbon content 0

## Inputs from technosphere
- acrylic dispersion, with water, in 58% solution state: 3.2795e-10 kg
- acrylic varnish, with water, in 53% solution state: 2.01373e-7 kg
- aluminium, cast alloy: 1.34486e-6 kg
- ammonia, anhydrous, liquid: 1.4583e-7 kg
- ammonium sulfate: 4.62007e-8 kg
- average incineration residue: -7.99737e-7 kg
- brass: 2.95036e-8, 1.48259e-10 kg (2 suppliers, which the file names only by identifier); sum of these 2.96518e-8 kg
- building, hall: 2.41675e-6 m2
- calcium nitrate: 2.79325e-7 kg
- cast iron: 7.87408e-7 kg
- chemical factory, organics: 2.77066e-14 unit
- chemical, inorganic: 5.19555e-8 kg
- chemical, organic: 4.82968e-7 kg
- chimney: 3.55814e-11 m
- chlorine, gaseous: 1.19549e-5 kg
- compressed air, 600 kPa gauge: 5.14249e-6 m3
- copper scrap, sorted, pressed: -3.25417e-6 kg
- copper, cathode: 3.87816e-6 kg
- corrugated board box: 3.55011e-7, 8.24018e-7, 9.78292e-7, 1.32242e-8 kg (4 suppliers, which the file names only by identifier); sum of these 2.17055e-6 kg
- diesel, burned in agricultural machinery: 1.00613e-5 MJ
- diesel, burned in building machine: 3.10689e-6 MJ
- diesel, burned in diesel-electric generating set, 18.5kW: 4.38912e-7 MJ
- diesel, low-sulfur: 1.16519e-9 kg
- dolomite: 1.68578e-7 kg
- electricity, high voltage: 2.11269e-5 kWh
- electricity, low voltage: 3.45195e-6, 2.98325e-5, 9.37201e-7, 3.11847e-6, 4.199e-6, 2.88794e-6, 1.59334e-5, 5.66576e-5, 0.000176903, 3.066e-5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 kWh (51 suppliers, which the file names only by identifier); sum of these 0.00595592 kWh
- electricity, medium voltage: 6.49098e-6, 3.71468e-5, 0.000133481 kWh (3 suppliers, which the file names only by identifier); sum of these 0.000177119 kWh
- ethylene: 1.21653e-5 kg
- ethylene dichloride: 3.90902e-6 kg
- ethylene vinyl acetate copolymer: 1.11074e-7 kg
- extrusion of plastic sheets and thermoforming, inline: 2.87575e-7 kg
- extrusion, plastic film: 6.57378e-7 kg
- feldspar: 7.82477e-6 kg
- fluorspar, 97% purity: 1.26577e-6 kg
- formaldehyde: 5.30556e-6, 2.7518e-8 kg (2 suppliers, which the file names only by identifier); sum of these 5.33308e-6 kg
- glass cullet, sorted: 4.58555e-5 kg
- glued laminated timber, average glue mix: 1.26922e-9, 2.75572e-9 m3 (2 suppliers, which the file names only by identifier); sum of these 4.02494e-9 m3
- hazardous waste, for incineration: -3.07558e-7, -8.03939e-9 kg (2 suppliers, which the file names only by identifier); sum of these -3.15598e-7 kg
- heat, central or small-scale, natural gas: 2.55006e-5 MJ
- heat, district or industrial, natural gas: 1.4675e-5, 9.21268e-6, 0.000379559 MJ (3 suppliers, which the file names only by identifier); sum of these 0.000403447 MJ
- heat, district or industrial, other than natural gas: 7.15857e-6 MJ
- heat, from steam, in chemical industry: 7.93466e-5 MJ
- heavy fuel oil: 1.43602e-8 kg
- hydrochloric acid, without water, in 30% solution state: 1.48957e-6 kg
- hydrogen, liquid: 4.37362e-9 kg
- industrial furnace, 1MW, oil: 2.66864e-12 unit
- industrial furnace, natural gas: 1.48586e-11 unit
- kraft paper: 2.30069e-5 kg
- lead: 6.06486e-6 kg
- light fuel oil: 7.67965e-9 kg
- lime, packed: 5.54638e-7 kg
- lubricating oil: 0.000665945, 0.000141027 kg (2 suppliers, which the file names only by identifier); sum of these 0.000806973 kg
- maintenance, transmission network, electricity, high voltage direct current land cable: 1.07608e-9 km*year
- maintenance, transmission network, electricity, high voltage direct current subsea cable: 9.12908e-9 km*year
- maize starch: 4.94438e-5 kg
- manganese: 1.50742e-7 kg
- medium density fibreboard: 2.63189e-10, 1.68558e-9 m3 (2 suppliers, which the file names only by identifier); sum of these 1.94877e-9 m3
- molybdenum: 7.19188e-10 kg
- municipal solid waste: -4.88473e-7, -1.23651e-6 kg (2 suppliers, which the file names only by identifier); sum of these -1.72499e-6 kg
- municipal waste collection service by 21 metric ton lorry: 4.505e-8 metric ton*km
- natural gas, high pressure: 3.58165e-6, 2.5663e-8 m3 (2 suppliers, which the file names only by identifier); sum of these 3.60731e-6 m3
- nitrogen, liquid: 1.13008e-6 kg
- oil storage, 3000l: 3.33574e-11 unit
- oxygen, liquid: 3.11204e-6 kg
- packaging box factory: 3.23832e-14 unit
- packaging film, low density polyethylene: 1.3035e-6 kg
- paper, woodcontaining, lightweight coated: 1.80816e-5, 5.27186e-5 kg (2 suppliers, which the file names only by identifier); sum of these 7.08002e-5 kg
- particleboard, uncoated: 5.29433e-9, 2.55771e-9 m3 (2 suppliers, which the file names only by identifier); sum of these 7.85205e-9 m3
- phenol: 1.69153e-6 kg
- plastic processing factory: 4.88706e-15 unit
- polyethylene terephthalate, granulate, amorphous: 6.16233e-8 kg
- polyethylene, high density, granulate: 1.05789e-6 kg
- polyethylene, low density, granulate: 1.08492e-7 kg
- polypropylene, granulate: 2.60892e-6 kg
- polystyrene, general purpose: 1.64864e-6 kg
- polyvinylchloride, bulk polymerised: 5.07046e-7 kg
- potato starch: 1.41993e-7 kg
- printer, laser, black/white: 7.37228e-9 unit
- printer, laser, colour: 7.37775e-9 unit
- printing ink, offset, without solvent, in 47.5% solution state: 2.47084e-7 kg
- refractory, fireclay, packed: 1.31755e-7 kg
- rosin size, for paper production: 1.97921e-8 kg
- sand: 4.3043e-5 kg
- sawnwood, hardwood, dried (u=10%), planed: 1.1238e-10, 4.56279e-11 m3 (2 suppliers, which the file names only by identifier); sum of these 1.58008e-10 m3
- scrap aluminium: -4.26601e-7, -2.00151e-8, -8.98246e-7 kg (3 suppliers, which the file names only by identifier); sum of these -1.34486e-6 kg
- scrap copper: -2.05508e-8, -4.38017e-7, -1.95077e-7 kg (3 suppliers, which the file names only by identifier); sum of these -6.53644e-7 kg
- scrap steel: -1.56467e-9, -1.3152e-6, -1.23497e-6 kg (3 suppliers, which the file names only by identifier); sum of these -2.55174e-6 kg
- sewage sludge, dried: -2.96751e-8 kg
- silica sand: 6.32886e-6 kg
- silicone product: 1.70879e-6 kg
- soda ash, light: 4.80993e-6 kg
- sodium borates: 3.31402e-6 kg
- sodium hydroxide, without water, in 50% solution state: 8.52998e-7 kg
- solvent, organic: 6.61653e-10 kg
- spent solvent mixture: -2.84634e-10, -1.21491e-8 kg (2 suppliers, which the file names only by identifier); sum of these -1.24337e-8 kg
- steel, low-alloyed: 8.12506e-6 kg
- steel, low-alloyed, hot rolled: 1.73923e-6 kg
- stone wool factory: 2.5488e-14 unit
- sulfuric acid: 1.18522e-7 kg
- tap water: 1.92737e-5, 0.000330251 kg (2 suppliers, which the file names only by identifier); sum of these 0.000349525 kg
- toner module, laser printer, black/white: 1.41548e-6 unit
- toner module, laser printer, colour: 1.41653e-6 unit
- urea: 2.22085e-6 kg
- used toner module, laser printer, black/white: -1.24562e-6 kg
- used toner module, laser printer, colour: -1.24655e-6 kg
- vinyl acetate: 6.15275e-7 kg
- vinyl chloride: 4.11426e-5 kg
- waste mineral oil: -5.64279e-6, -0.000579448, -0.000221405 kg (3 suppliers, which the file names only by identifier); sum of these -0.000806496 kg
- waste paper, unsorted: -8.85606e-7, -8.85606e-7 kg (2 suppliers, which the file names only by identifier); sum of these -1.77121e-6 kg
- waste paperboard: -4.06359e-7, -6.09872e-8, -2.65033e-7, -4.94338e-5, -2.66108e-6, -6.58437e-6, -1.43176e-7, -3.64901e-8, -3.55324e-8 kg (9 suppliers, which the file names only by identifier); sum of these -5.96269e-5 kg
- waste plastic, mixture: -4.07052e-8 kg
- waste polyethylene: -1.14108e-7, -2.99036e-9, -7.98819e-7, -7.62426e-9, -3.89512e-8, -5.7661e-10, -3.14909e-9, -1.2722e-9, -9.88955e-8 kg (9 suppliers, which the file names only by identifier); sum of these -1.06639e-6 kg
- waste polyethylene/polypropylene product: -2.04492e-7, -8.0663e-8, -2.42049e-9 kg (3 suppliers, which the file names only by identifier); sum of these -2.87575e-7 kg
- waste polypropylene: -2.03221e-9, -1.57976e-7, -9.21079e-10, -1.27604e-6, -5.03037e-9, -1.2179e-8, -4.7768e-9, -1.82276e-7 kg (8 suppliers, which the file names only by identifier); sum of these -1.64123e-6 kg
- waste polystyrene: -4.79838e-9, -1.2818e-6, -2.04139e-9, -1.831e-7, -5.05309e-9, -9.25239e-10, -1.2234e-8, -1.58689e-7 kg (8 suppliers, which the file names only by identifier); sum of these -1.64864e-6 kg
- waste polyvinylchloride: -2.84561e-10, -1.47576e-9, -6.27838e-10, -1.5541e-9, -3.76262e-9, -5.63131e-8, -4.88055e-8, -3.94223e-7 kg (8 suppliers, which the file names only by identifier); sum of these -5.07046e-7 kg
- waste wire plastic: -8.38585e-7 kg
- waste wood, post-consumer: -3.51578e-6, -3.51578e-6 kg (2 suppliers, which the file names only by identifier); sum of these -7.03156e-6 kg
- waste yarn and waste textile: -5.80021e-5 kg
- wastewater, average: -7.10303e-9, -8.74533e-8, -4.68407e-10, -1.31561e-7, -2.82635e-7 m3 (5 suppliers, which the file names only by identifier); sum of these -5.0922e-7 m3
- wastewater, unpolluted: -1.83407e-6 m3
- wire drawing, copper: 3.61574e-6 kg
- wooden board factory, organic bonded boards: 5.29137e-16 unit
- yarn, cotton: 0.00295811 kg
- zinc coat, coils: 1.28948e-7 m2

## Inputs from nature
- Occupation, construction site [natural resource, land]: 1.02227e-9 m2*year
- Occupation, seabed, infrastructure [natural resource, land]: 1.0042e-6 m2*year
- Transformation, from seabed, unspecified [natural resource, land]: 2.5105e-8 m2
- Transformation, to seabed, infrastructure [natural resource, land]: 2.5105e-8 m2
- Water, cooling, unspecified natural origin [natural resource, in water]: 1.90328e-6 m3
- Water, lake [natural resource, in water]: 8.53109e-9 m3
- Water, river [natural resource, in water]: 2.95237e-8 m3
- Water, unspecified natural origin [natural resource, in water]: 2.56429e-8 m3
- Water, well, in ground [natural resource, in water]: 4.43416e-6 m3

## Emissions to nature
- Acetaldehyde [air, urban air close to ground]: 9.27622e-14 kg
- Acetic acid [air, urban air close to ground]: 1.14582e-12 kg
- Acetone [air, urban air close to ground]: 8.74556e-14 kg
- Ammonia [air, unspecified]: 8.48251e-8 kg
- Ammonia [air, urban air close to ground]: 6.24797e-14 kg
- Arsenic ion [air, urban air close to ground]: 7.57948e-15 kg
- Benzene [air, unspecified]: 1.30711e-11 kg
- Benzene [air, urban air close to ground]: 2.12832e-12 kg
- Benzo(a)pyrene [air, urban air close to ground]: 7.99658e-17 kg
- Butane [air, urban air close to ground]: 3.8336e-12 kg
- Calcium [air, urban air close to ground]: 6.41341e-14 kg
- Carbon dioxide, fossil [air, non-urban air or from high stacks]: 2.30962e-6 kg
- Carbon dioxide, fossil [air, unspecified]: 5.70168e-6 kg
- Carbon dioxide, fossil [air, urban air close to ground]: 3.71178e-7 kg
- Carbon monoxide, fossil [air, unspecified]: 3.35731e-9 kg
- Carbon monoxide, fossil [air, urban air close to ground]: 1.67358e-11 kg
- Chlorine [air, unspecified]: 1.89984e-11 kg
- Chloroethylene [air, unspecified]: 1.3897e-9 kg
- Chloroform [air, unspecified]: 5.24587e-11 kg
- Chromium III [air, urban air close to ground]: 2.88603e-15 kg
- Chromium VI [air, urban air close to ground]: 2.91518e-17 kg
- Cobalt II [air, urban air close to ground]: 1.92402e-14 kg
- Copper ion [air, urban air close to ground]: 2.73692e-13 kg
- Dinitrogen monoxide [air, unspecified]: 5.92769e-12 kg
- Dinitrogen monoxide [air, urban air close to ground]: 1.22369e-12 kg
- Dioxins, measured as 2,3,7,8-tetrachlorodibenzo-p-dioxin [air, unspecified]: 4.63802e-19 kg
- Dioxins, measured as 2,3,7,8-tetrachlorodibenzo-p-dioxin [air, urban air close to ground]: 5.91514e-22 kg
- Ethane, 1,2-dichloro- [air, unspecified]: 1.6603e-9 kg
- Ethanol [air, urban air close to ground]: 1.74911e-13 kg
- Ethylene [air, unspecified]: 2.39981e-9 kg
- Fluorine [air, unspecified]: 5.17816e-9 kg
- Formaldehyde [air, unspecified]: 2.64661e-8 kg
- Formaldehyde [air, urban air close to ground]: 1.13293e-12 kg
- Hydrocarbons, aliphatic, alkanes, unspecified [air, urban air close to ground]: 5.31101e-13 kg
- Hydrocarbons, aliphatic, unsaturated [air, urban air close to ground]: 1.74911e-14 kg
- Hydrocarbons, aromatic [air, urban air close to ground]: 9.88334e-14 kg
- Hydrochloric acid [air, unspecified]: 1.90376e-10 kg
- Hydrochloric acid [air, urban air close to ground]: 8.75075e-13 kg
- Hydrogen fluoride [air, urban air close to ground]: 3.13848e-14 kg
- Iron ion [air, urban air close to ground]: 4.78091e-13 kg
- Lead II [air, urban air close to ground]: 8.45405e-14 kg
- Mercury II [air, urban air close to ground]: 4.35486e-16 kg
- Methane, fossil [air, unspecified]: 2.895e-10 kg
- Methane, fossil [air, urban air close to ground]: 1.274e-11 kg
- Methane, tetrachloro-, R-10 [air, unspecified]: 2.78656e-11 kg
- Methanol [air, urban air close to ground]: 2.97348e-13 kg
- Molybdenum VI [air, urban air close to ground]: 4.6643e-15 kg
- Monochloroethane [air, unspecified]: 4.38089e-11 kg
- NMVOC, non-methane volatile organic compounds [air, unspecified]: 1.53324e-9 kg
- Nickel II [air, urban air close to ground]: 2.85688e-13 kg
- Nitrogen oxides [air, non-urban air or from high stacks]: 1.56694e-7 kg
- Nitrogen oxides [air, unspecified]: 2.73638e-9 kg
- Nitrogen oxides [air, urban air close to ground]: 1.72176e-10 kg
- PAH, polycyclic aromatic hydrocarbons [air, urban air close to ground]: 5.36235e-14 kg
- Particulate Matter, < 2.5 um [air, unspecified]: 1.06043e-10 kg
- Particulate Matter, < 2.5 um [air, urban air close to ground]: 5.99661e-12 kg
- Particulate Matter, > 10 um [air, unspecified]: 9.17156e-10 kg
- Particulate Matter, > 10 um [air, urban air close to ground]: 1.39929e-12 kg
- Particulate Matter, > 2.5 um and < 10um [air, unspecified]: 2.65094e-10 kg
- Particulate Matter, > 2.5 um and < 10um [air, urban air close to ground]: 6.99646e-13 kg
- Pentane [air, urban air close to ground]: 6.44727e-12 kg
- Phenol [air, unspecified]: 1.49591e-8 kg
- Propane [air, urban air close to ground]: 1.08641e-12 kg
- Propene [air, unspecified]: 5.18127e-12 kg
- Propionic acid [air, urban air close to ground]: 1.06133e-13 kg
- Selenium IV [air, urban air close to ground]: 6.99646e-15 kg
- Sodium [air, urban air close to ground]: 4.37279e-13 kg
- Sulfur dioxide [air, unspecified]: 2.18861e-12 kg
- Sulfur dioxide [air, urban air close to ground]: 2.50325e-10 kg
- Sulfur hexafluoride [air, unspecified]: 7.60742e-15 kg
- Toluene [air, urban air close to ground]: 1.09015e-12 kg
- Trichloroethylene [air, unspecified]: 1.74122e-11 kg
- Vanadium V [air, urban air close to ground]: 5.83038e-13 kg
- Water [air, non-urban air or from high stacks]: 9.83801e-9 m3
- Water [air, unspecified]: 4.31623e-6 m3
- Zinc II [air, urban air close to ground]: 2.9643e-13 kg
- AOX, Adsorbable Organic Halogen [water, unspecified]: 6.77886e-11 kg
- Ammonium [water, unspecified]: 5.24997e-10 kg
- Arsenic ion [water, unspecified]: 2.24796e-14 kg
- BOD5, Biological Oxygen Demand [water, surface water]: 1.16247e-10 kg
- Benzene, hexachloro- [water, unspecified]: 2.2609e-15 kg
- Benzene, pentachloro- [water, unspecified]: 3.70993e-15 kg
- COD, Chemical Oxygen Demand [water, unspecified]: 9.31664e-9 kg
- Cadmium II [water, unspecified]: 2.26852e-15 kg
- Chloride [water, unspecified]: 2.15643e-7 kg
- Chloroethylene [water, unspecified]: 1.3457e-11 kg
- Chloroform [water, unspecified]: 2.90909e-13 kg
- Chromium III [water, unspecified]: 2.7458e-14 kg
- Copper ion [water, unspecified]: 4.30909e-12 kg
- DOC, Dissolved Organic Carbon [water, unspecified]: 3.45061e-9 kg
- Dioxins, measured as 2,3,7,8-tetrachlorodibenzo-p-dioxin [water, unspecified]: 8.08391e-19 kg
- Ethane, 1,2-dichloro- [water, unspecified]: 2.44121e-12 kg
- Mercury II [water, unspecified]: 2.47792e-16 kg
- Methane, tetrachloro-, R-10 [water, unspecified]: 1.78247e-13 kg
- Nickel II [water, unspecified]: 3.36634e-13 kg
- Nitrogen, organic bound [water, unspecified]: 2.92517e-10 kg
- Phosphorus [water, unspecified]: 5.9046e-11 kg
- Sodium I [water, unspecified]: 4.76265e-8 kg
- Sulfate [water, unspecified]: 5.14019e-9 kg
- Suspended solids, unspecified [water, unspecified]: 8.54467e-10 kg
- TOC, Total Organic Carbon [water, unspecified]: 3.45061e-9 kg
- Water [water, unspecified]: 1.5369e-7 m3
- Zinc II [water, unspecified]: 5.54823e-13 kg
