# treatment of waste emulsion paint, municipal incineration with fly ash extraction

Dataset: EcoSpold 2, unit process
Geography: CH
Time period: 2006-01-01 to 2022-12-31
Technology level: current
Classification: ISIC rev.4 ecoinvent: 3821:Treatment and disposal of non-hazardous waste
Synonyms: municipal waste incineration
Scenario: Business-as-Usual
System model: Allocation at the point of substitution
Share of production covered: 1.8 %
Generated by: Gabor Doka
Published in: Doka G. 2015
Database: ecoinvent
isCopyrightProtected: true

## General comment
This dataset represents the activity of waste disposal of waste emulsion paint in a municipal solid waste incinerator (MSWI) // Recommended use of this dataset: For small amounts of dried waste emulsion paint, which go to disposal as part of communal waste mixture, e.g. small leftovers or paint on other material. Larger amounts of waste paint, unused liquid paint or removed (stripped) paint are to be disposed in hazardous waste incinerator. // // Waste composition (wet, in ppm): upper heating value 11.14 MJ/kg; lower heating value 10.51 MJ/kg; H2O n.a.; O 214760; H 31708; C 268330; S n.a.; N n.a.; P n.a.; B n.a.; Cl 86465; Br n.a.; F n.a.; I n.a.; Ag n.a.; As 0.44122; Ba n.a.; Cd 0.016849; Co n.a.; Cr 1.248; Cu n.a.; Hg 0.0085442; Mn n.a.; Mo n.a.; Ni 0.95527; Pb 0.64946; Sb n.a.; Se n.a.; Sn n.a.; V n.a.; Zn 6.5444; Be n.a.; Sc n.a.; Sr n.a.; Ti 135000; Tl n.a.; W n.a.; Si 149810; Fe n.a.; Ca 113920; Al n.a.; K n.a.; Mg n.a.; Na n.a.; // Share of carbon in waste that is biogenic 0%. // Share of metals in waste not oxidised and bulk-recyclable (exclude very small or thin parts) Iron: 0%; Alu: 0%; Copper: 0%. // Recovery of metal scrap from bottom ash to recycling: 0g iron scrap, 0g aluminium scrap, 0g copper scrap. From this waste, the FLUWA process in the technology mix recovers 0.00471kg (DM) of a hydroxide sludge to be recycled in zinc furnaces. // Ultimately one kg of this waste produces 0.7551 kg of bottom ash (can include some washed ash) and 0.0867 kg of residues, which are landfilled (technology mix). Additional solidification of residues with 0.03468 kg of cement.Net energy production: 1.18MJ/kg electric energy and 2.52MJ/kg thermal energy. //

## Included activities start
waste incineration from waste reception gate and delivery into waste bunker at incinerator plant site (without transports to the incinerator)

## Included activities end
Waste-specific short-term emissions to water from leachate. Long-term emissions from landfill to ground water.

## Geography
Specific to the technology mix encountered in Switzerland in 2012.

## Technology
average Swiss MSWI plants in 2010 (grate incinerators) with electrostatic precipitator for fly ash (ESP), wet flue gas scrubber and 25% SNCR , 42.77% SCR-high dust , 32.68% SCR-low dust -DeNOx facilities and 0% without Denox (weighted according to mass of burnt waste, representing Swiss average). Efficiency of iron scrap separation from slag : 58%. Efficiency of non-ferrous scrap separation from slag : 31%. The technology mix for this dataset includes a filter ash treatment (FLUWA) of a share of 46.22%. Gross electric efficiency technology mix 15.84% and Gross thermal efficiency technology mix 28.51%

## Time period
Waste composition as given in literature reference, theoretical data or other source. Transfer coefficients for modern MSWI.

## Reference product
- heat, for reuse in municipal waste incineration only: 1 MJ; name E_th_prod_MSWI; By-product classification allocatable product; CPC 17300: Steam and hot water; lognormal variance with pedigree 0.082553, pedigree (1,1,1,1,1)
  Net useful heat generated from this waste and used in internal MSWI plant energy redistribution.
  Uncertainty: uncertainty is calculated from uncertainties in waste composition and uncertainties in energy efficiency and the uncertainty in internal energy demand
  production volume 791640 MJ
    calculated in proportion to reference product waste input to incinerator
  property exergy 0.1842 MJ; name E_th_prod_MSWI_exergy
    This exergy property is based on the exergy content of the product.
  property price 0.0106 EUR2005
    Average European district heat price from Ecoheatcool and Euroheat 2005-2006, Ecoheat Work package 1: The European heat market. Final report. 10.6 EUR/GJ i s the price of district heat. http://www.solarthermalworld.org/files/Ecoheatcool%20WP1%20Web.pdf?download
  property true value relation 0.1842; name E_th_prod_MSWI_true_value_relation
    property to calculate "true value" from
  properties: carbon allocation 0 kg, carbon content 0

## Inputs from technosphere
- acetic acid, without water, in 98% solution state: 4.22083e-10 kg
- acrylic dispersion, with water, in 58% solution state: 2.45662e-8 kg
- acrylic varnish, with water, in 53% solution state: 2.85698e-7, 8.07176e-9 kg (2 suppliers, which the file names only by identifier); sum of these 2.9377e-7 kg
- alkyd paint, white, without solvent, in 60% solution state: 7.23297e-6, 3.18394e-5 kg (2 suppliers, which the file names only by identifier); sum of these 3.90724e-5 kg
- alkyd paint, white, without water, in 60% solution state: 1.16567e-6 kg
- aluminium scrap, post-consumer: -1.42251e-5 kg
- aluminium, cast alloy: 6.67283e-6 kg
- aluminium, wrought alloy: 1.52357e-5 kg
- asbestos, crysotile type: 4.35447e-5 kg
- base plaster: 2.77707e-6 kg
- blower and heat exchange unit, central, 600-1200 m3/h: 1.31167e-11 unit
- blower and heat exchange unit, decentralized, 180-250 m3/h: 6.01296e-8 unit
- brass: 1.29183e-7, 3.91463e-9 kg (2 suppliers, which the file names only by identifier); sum of these 1.33097e-7 kg
- bronze: 7.90028e-6 kg
- cast iron: 9.41652e-6 kg
- cement, unspecified: 6.08828e-5 kg
- ceramic tile: 2.01228e-5 kg
- clay brick: 0.000313828 kg
- concrete, normal strength: 6.3817e-7, 1.16669e-6 m3 (2 suppliers, which the file names only by identifier); sum of these 1.80486e-6 m3
- copper, cathode: 9.8054e-6 kg
- corrugated board box: 1.82079e-6 kg
- diesel: 3.42675e-9, 1.6979e-9, 3.46935e-10, 1.01509e-6, 1.32753e-8, 2.4003e-10, 3.38374e-8, 8.16251e-11 kg (8 suppliers, which the file names only by identifier); sum of these 1.068e-6 kg
- diesel, burned in building machine: 3.33813e-5 MJ
- door, inner, glass-wood: 4.28379e-9 m2
- door, inner, wood: 1.16387e-7 m2
- door, outer, wood-aluminium: 6.10099e-9 m2
- door, outer, wood-glass: 4.40893e-9 m2
- electricity, low voltage: 5.98167e-7, 1.3954e-6, 1.48429e-5 kWh (3 suppliers, which the file names only by identifier); sum of these 1.68365e-5 kWh
- electricity, medium voltage: 3.73955e-9, 1.05247e-8, 0.0016871, 1.00608e-9, 2.80273e-10, 3.41956e-9, 5.87696e-6, 4.74822e-10, 1.80766e-8, 1.8338e-6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 kWh (49 suppliers, which the file names only by identifier); sum of these 0.001775 kWh
- electronic component machinery, unspecified: 2.56342e-8 unit
- electronics, for control units: 1.99658e-7 kg
- elevator, hydraulic: 1.86154e-9 unit
- ethylene glycol monoethyl ether: 1.08174e-8 kg
- flat glass, coated: 2.66312e-6, 9.88468e-6 kg (2 suppliers, which the file names only by identifier); sum of these 1.25478e-5 kg
- flat glass, uncoated: 1.31493e-7, 4.01934e-7 kg (2 suppliers, which the file names only by identifier); sum of these 5.33428e-7 kg
- glass wool mat: 4.38583e-5 kg
- glued laminated timber, average glue mix: 4.88233e-8, 1.06004e-7 m3 (2 suppliers, which the file names only by identifier); sum of these 1.54828e-7 m3
- gypsum plasterboard: 1.51649e-5 kg
- heat, district or industrial, natural gas: 2.56762e-6, 0.000196332, 1.35041e-5, 2.21907e-7, 3.92107e-5 MJ (5 suppliers, which the file names only by identifier); sum of these 0.000251836 MJ
- heat, district or industrial, other than natural gas: 0.00014626, 2.69943e-6, 1.6826e-5, 0.000446916, 6.77597e-8, 0.0020145 MJ (6 suppliers, which the file names only by identifier); sum of these 0.00262727 MJ
- hydrochloric acid, without water, in 30% solution state: 2.24744e-10, 9.83947e-10 kg (2 suppliers, which the file names only by identifier); sum of these 1.20869e-9 kg
- industrial machine, heavy, unspecified: 4.50037e-9 kg
- inert waste: -2.56607e-5 kg
- inert waste, for final disposal: -2.81653e-7, -4.3263e-5 kg (2 suppliers, which the file names only by identifier); sum of these -4.35447e-5 kg
- isopropanol: 4.50037e-8 kg
- lead: 4.9047e-7 kg
- lime, hydrated, packed: 1.94201e-9, 4.05028e-11 kg (2 suppliers, which the file names only by identifier); sum of these 1.98251e-9 kg
- lubricating oil: 3.36987e-7, 1.268e-7 kg (2 suppliers, which the file names only by identifier); sum of these 4.63787e-7 kg
- maize starch: 3.55075e-9 kg
- marine engine: 3.2066e-7 unit
- natural stone plate, cut: 3.24379e-8 kg
- nitric acid, without water, in 50% solution state: 1.36926e-11, 1.7634e-10, 2.03451e-11, 5.05946e-11, 6.57967e-11, 2.42423e-11, 8.33777e-11, 2.07939e-11, 2.02698e-11, 1.54473e-10 kg (10 suppliers, which the file names only by identifier); sum of these 6.29926e-10 kg
- paper, woodfree, coated: 2.8695e-5 kg
- paper, woodfree, uncoated: 2.11213e-6 kg
- pig iron: 1.09975e-6, 9.71851e-6 kg (2 suppliers, which the file names only by identifier); sum of these 1.08183e-5 kg
- pitch: 4.93923e-7, 3.47568e-10, 1.08676e-8, 4.96186e-10, 4.38344e-8, 1.71323e-10, 7.75404e-9, 3.0061e-9 kg (8 suppliers, which the file names only by identifier); sum of these 5.604e-7 kg
- plywood: 9.16668e-8 m3
- polyethylene, high density, granulate: 2.95533e-5 kg
- polypropylene, granulate: 1.29381e-5 kg
- polystyrene, expandable: 1.23152e-5 kg
- polyurethane, flexible foam: 1.02216e-5, 2.09358e-6 kg (2 suppliers, which the file names only by identifier); sum of these 1.23152e-5 kg
- polyurethane, rigid foam: 4.35331e-7, 8.81491e-7 kg (2 suppliers, which the file names only by identifier); sum of these 1.31682e-6 kg
- polyvinylchloride, bulk polymerised: 2.61101e-6 kg
- polyvinylidenchloride, granulate: 4.07131e-6, 8.24388e-6 kg (2 suppliers, which the file names only by identifier); sum of these 1.23152e-5 kg
- printing ink, offset, without solvent, in 47.5% solution state: 1.91369e-7 kg
- propylene glycol, liquid: 9.85631e-8, 4.78467e-8 kg (2 suppliers, which the file names only by identifier); sum of these 1.4641e-7 kg
- refrigeration machine, R134a as refrigerant: 5.47054e-9 unit
- refrigeration machine, carbon dioxide, liquid as refrigerant: 6.07848e-10 unit
- reinforcing steel: 0.00507143 kg
- road vehicle factory: 5.25911e-17, 5.47957e-15 unit (2 suppliers, which the file names only by identifier); sum of these 5.53217e-15 unit
- sanitary ceramics: 4.90502e-5 kg
- sawnwood, beam, softwood, dried (u=10%), planed: 8.4043e-9 m3
- sawnwood, beam, softwood, raw, dried (u=10%): 8.46514e-9 m3
- scrap aluminium: -8.84473e-7, -4.14974e-8, -1.86234e-6 kg (3 suppliers, which the file names only by identifier); sum of these -2.78831e-6 kg
- scrap copper: -1.21037e-7, -2.57977e-6, -5.43193e-6 kg (3 suppliers, which the file names only by identifier); sum of these -8.13274e-6 kg
- scrap steel: -1.55341e-6, -0.00380773, -0.00122609 kg (3 suppliers, which the file names only by identifier); sum of these -0.00503537 kg
- section bar rolling, steel: 2.59861e-7, 1.05584e-5 kg (2 suppliers, which the file names only by identifier); sum of these 1.08183e-5 kg
- sheet rolling, aluminium: 5.14033e-7 kg
- sheet rolling, steel: 6.9136e-8, 2.71267e-6 kg (2 suppliers, which the file names only by identifier); sum of these 2.78181e-6 kg
- sodium hydroxide, without water, in 50% solution state: 4.08385e-6 kg
- solvent, organic: 5.10177e-8 kg
- spent solvent mixture: -3.09658e-8 kg
- steel, chromium steel 18/8, hot rolled: 3.32756e-8 kg
- steel, low-alloyed: 6.26673e-7 kg
- steel, low-alloyed, hot rolled: 5.45235e-7 kg
- stone wool, packed: 6.65487e-8 kg
- sulfuric acid: 1.56589e-7, 2.18368e-8 kg (2 suppliers, which the file names only by identifier); sum of these 1.78426e-7 kg
- synthetic rubber: 3.90634e-6 kg
- tap water: 7.29232e-9, 9.96856e-5, 3.03898e-7, 1.20518e-8, 1.30368e-6, 4.66302e-5, 2.2488e-8, 3.47766e-6, 0.000245294, 0.000775284 kg (10 suppliers, which the file names only by identifier); sum of these 0.00117202 kg
- tempering, flat glass: 2.66312e-6, 9.406e-7 kg (2 suppliers, which the file names only by identifier); sum of these 3.60372e-6 kg
- textile, woven cotton: 5.82157e-9 kg
- thermoforming, with calendering: 8.21626e-9 kg
- used door, inner, glass-wood: -4.28379e-9 m2
- used door, inner, wood: -1.16387e-7 m2
- used door, outer, wood-aluminium: -6.10099e-9 m2
- used door, outer, wood-glass: -4.40893e-9 m2
- used lorry with refrigeration machine, 16 metric ton: -6.07839e-9 unit
- used lorry, 16 metric ton: -7.63462e-11 unit
- used lorry, 28 metric ton: -1.24125e-10 unit
- used lorry, 40 metric ton: -1.16331e-10 unit
- used train, passenger, high-speed: -3.12513e-12 unit
- used train, passenger, long-distance: -9.0691e-11 unit
- used tram: -3.06652e-10 unit
- used window frame, wood: -7.16369e-8 m2
- used window frame, wood-metal: -6.6881e-9 m2
- waste cement, hydrated: -6.08828e-5 kg
- waste concrete: -0.00461216 kg
- waste electric and electronic equipment: -6.40854e-5 kg
- waste emulsion paint: -7.26105e-8, -3.29887e-5, -3.10966e-6 kg (3 suppliers, which the file names only by identifier); sum of these -3.6171e-5 kg
- waste glass: -8.21142e-6, -1.04629e-6, -2.66312e-6 kg (3 suppliers, which the file names only by identifier); sum of these -1.19208e-5 kg
- waste gypsum plasterboard: -1.51649e-5 kg
- waste mineral wool: -6.1558e-5, -2.88045e-7, -2.52433e-5 kg (3 suppliers, which the file names only by identifier); sum of these -8.70893e-5 kg
- waste paint on wall: -1.45137e-6 kg
- waste paper, unsorted: -8.05111e-6 kg
- waste paperboard, unsorted: -1.82079e-6 kg
- waste plastic, mixture: -6.83869e-6, -3.45572e-8, -7.62449e-8, -5.92697e-6, -1.32646e-6, -4.78746e-5, -4.56935e-7, -1.79217e-7, -1.8873e-7 kg (9 suppliers, which the file names only by identifier); sum of these -6.29024e-5 kg
- waste polyurethane foam: -1.31579e-7, -1.03208e-10 kg (2 suppliers, which the file names only by identifier); sum of these -1.31682e-7 kg
- waste polyvinylchloride: -1.35595e-6, -1.25506e-6 kg (2 suppliers, which the file names only by identifier); sum of these -2.61101e-6 kg
- waste wood, untreated: -7.86373e-5, -3.98111e-6 kg (2 suppliers, which the file names only by identifier); sum of these -8.26184e-5 kg
- wastewater from lorry production: -2.37066e-10, -1.37045e-8 m3 (2 suppliers, which the file names only by identifier); sum of these -1.39415e-8 m3
- wastewater, average: -4.71263e-8, -2.88954e-10, -1.10167e-6, -1.97404e-8 m3 (4 suppliers, which the file names only by identifier); sum of these -1.16882e-6 m3
- welding, arc, steel: 0.00330071 m
- welding, gas, steel: 0.0250323 m
- white spirit: 6.29638e-8 kg
- window frame, aluminium, U=1.6 W/m2K: 2.77753e-7 m2
- window frame, wood, U=1.5 W/m2K: 7.16369e-8 m2
- window frame, wood-metal, U=1.6 W/m2K: 6.6881e-9 m2
- wire drawing, copper: 4.9643e-9, 1.94694e-7 kg (2 suppliers, which the file names only by identifier); sum of these 1.99658e-7 kg
- zinc: 3.5319e-5 kg

## Inputs from nature
- Occupation, urban, continuously built [natural resource, land]: 5.1191e-5 m2*year
- Transformation, from heterogeneous, agricultural [natural resource, land]: 8.51157e-8 m2
- Transformation, from urban, continuously built [natural resource, land]: 5.40467e-7 m2
- Transformation, from urban, green area [natural resource, land]: 5.69633e-8 m2
- Transformation, to urban, continuously built [natural resource, land]: 6.82546e-7 m2
- Water, well, in ground [natural resource, in water]: 4.44466e-7 m3

## Emissions to nature
- 2-Propanol [air, urban air close to ground]: 4.50037e-8 kg
- Ammonia [air, unspecified]: 1.42613e-10 kg
- Benzene [air, unspecified]: 8.3777e-11 kg
- Benzene, ethyl- [air, urban air close to ground]: 2.00039e-9 kg
- Cadmium II [air, unspecified]: 1.10637e-14 kg
- Carbon dioxide, fossil [air, unspecified]: 4.04816e-6 kg
- Carbon monoxide, fossil [air, unspecified]: 6.22252e-9 kg
- Chromium III [air, unspecified]: 1.87379e-12 kg
- Copper ion [air, unspecified]: 1.87379e-12 kg
- Dinitrogen monoxide [air, unspecified]: 1.42613e-10 kg
- Heptane [air, urban air close to ground]: 1.95704e-8 kg
- Lead II [air, unspecified]: 1.21509e-16 kg
- Mercury II [air, unspecified]: 2.20634e-17 kg
- Methane, fossil [air, unspecified]: 1.05521e-10 kg
- Methanol [air, urban air close to ground]: 2.06439e-9 kg
- NMVOC, non-methane volatile organic compounds [air, non-urban air or from high stacks]: 3.1631e-7 kg
- NMVOC, non-methane volatile organic compounds [air, unspecified]: 3.06892e-5 kg
- Nickel II [air, unspecified]: 7.73818e-14 kg
- Nitrogen oxides [air, unspecified]: 3.83711e-8 kg
- Particulate Matter, < 2.5 um [air, unspecified]: 1.62438e-9 kg
- Particulate Matter, > 10 um [air, unspecified]: 6.97076e-11 kg
- Particulate Matter, > 2.5 um and < 10um [air, unspecified]: 1.35578e-10 kg
- Propylene oxide [air, urban air close to ground]: 3.75719e-9 kg
- Selenium IV [air, unspecified]: 1.10637e-14 kg
- Sulfur dioxide [air, unspecified]: 7.67423e-10 kg
- Toluene [air, unspecified]: 3.52375e-11 kg
- Toluene [air, urban air close to ground]: 1.76712e-9 kg
- Water [air, unspecified]: 8.93966e-8 m3
- Xylene [air, unspecified]: 3.52375e-11 kg
- Xylene [air, urban air close to ground]: 1.76712e-9 kg
- Zinc II [air, unspecified]: 1.10637e-12 kg
- Hydrocarbons, unspecified [soil, unspecified]: 6.74092e-7 kg
- BOD5, Biological Oxygen Demand [water, unspecified]: 8.05794e-10 kg
- COD, Chemical Oxygen Demand [water, unspecified]: 8.05794e-10 kg
- DOC, Dissolved Organic Carbon [water, unspecified]: 3.52375e-10 kg
- Hydrocarbons, unspecified [water, unspecified]: 6.74092e-7 kg
- TOC, Total Organic Carbon [water, unspecified]: 3.52375e-10 kg
- Water [water, unspecified]: 3.5132e-7 m3
