# gypsum fibreboard production

Dataset: EcoSpold 2, unit process
Geography: CH
Time period: 1997-01-01 to 2022-12-31
Technology level: current
Classification: ISIC rev.4 ecoinvent: 2394:Manufacture of cement, lime and plaster
Classification: EcoSpold01Categories: construction materials/coverings
Tags: ConvertedDataset
Scenario: Business-as-Usual
System model: Allocation at the point of substitution
Generated by: Hans-Jörg Althaus
Published in: Kellenberger D. 2004
Database: ecoinvent
isCopyrightProtected: true

## General comment
produced 100% from natural gypsum (no FGD). Energy consumption is extrapolated from production of solid gypsum board
[This dataset was already contained in the ecoinvent database version 2. It was not individually updated during the transfer to ecoinvent version 3. Life Cycle Impact Assessment results may still have changed, as they are affected by changes in the supply chain, i.e. in other datasets. This dataset was generated following the ecoinvent quality guidelines for version 2. It may have been subject to central changes described in the ecoinvent version 3 change report (http://www.ecoinvent.org/database/ecoinvent-version-3/reports-of-changes/), and the results of the central updates were reviewed extensively. The changes added e.g. consistent water flows and other information throughout the database. The documentation of this dataset can be found in the ecoinvent reports of version 2, which are still available via the ecoinvent website. The change report linked above covers all central changes that were made during the conversion process.]

## Included activities end
production of board (incl. drying)

## Geography
data for Switzerland

## Technology
Average technology for consumption in Switzerland

## Parameters
- fraction, process water, to air: 0.59 dimensionless; name fraction_PW_to_air; lognormal variance with pedigree 0.092025, pedigree (4,4,3,2,4)
  Literature value (Statistics Canada, 2007 & Shaffer, K.H., 2008, Consumptive water use in the Great Lakes Basin, USGS) (Vionnet, S., Quantis Water Database - Technical Report, 2012).
- fraction, tap water, to air: 0.59 dimensionless; name fraction_TW_to_air; = fraction_PW_to_air; lognormal variance with pedigree 0.092025, pedigree (4,4,3,2,4)
  Calculated value. See comment in the other parametres present in this dataset. Tap water is considered to be always used as process water, thus process water fractions to air are applied to all tap water input flows to calculate the amount of water consumed in the processes.

## Reference product
- gypsum fibreboard: 1 kg; By-product classification allocatable product; CPC 37530: Articles of plaster or of compositions based on plaster
  EcoSpold01Location=CH
  production volume 0.0336675 kg
    This is a placeholder value that does not reflect real-world production volumes. This dataset does not currently require a real-world production volume to work in the database framework, and no actual data were collected yet. This has no negative effect on the results of the ecoinvent database. The placeholder value of this activity was scaled according to the nominal GDP of 2005 (source: United Nations, http://data.un.org/Glossary.aspx?q=GDP+%28current+US%24%29, accessed 20130726) to reflect an appropriate share of the global production volume, which is also a placeholder value.
  property carbon content, fossil 0
    Gypsum (CaSO4-2H2O) with 15-20% cellulose fibres (ecoinvent v2.2 report 7, part VIII, pg 5). C-content/dry mass of natural fibres was considered 46% (from "Evolutionary and Biochemical Aspects", A.D. Kay and T. Vrede (in Global Ecology, 2010, Elsevier B.V., S.E. Jørgensen Ed.))
  property carbon content, non-fossil 0.0805
    (same comment as for gypsum fibreboard)
  property heating value, net 2.44 MJ
    LHV is calculated based on the Carbon content of the product. More details can be found on the respective documentation.
  property price 1.77 EUR2005
    Calculated by 2.o-The production volume of this product is small compared to other products supplied by the activities within the same ISIC 3 category. Therefore, an average price of products supplied by the activities in the same ISIC 3 code has been applied.This price is obtained as '_45 Glass, mineral wool and ceramic goods, virgin, EU27' in the 'EU & DK Input Output Database' (available in SimaPro). The price is assumed to be valid for both RER2003, RER 2004, world 2003 and world 2004.
  properties: carbon allocation 0.0805 kg, carbon content 0.0805, dry mass 1 kg, water content 0, water in wet mass 0 kg, wet mass 1 kg

## Inputs from technosphere
- acrylic dispersion, with water, in 58% solution state: 0.000153273 kg
- acrylic varnish, with water, in 53% solution state: 5.03612e-5 kg
- aluminium scrap, post-consumer: -0.00320715 kg
- aluminium, wrought alloy: 0.00320715 kg
- chemical, inorganic: 4.81556e-6 kg
- chemical, organic: 4.81556e-6 kg
- chimney: 1.22509e-8 m
- copper scrap, sorted, pressed: -0.000290033 kg
- copper, cathode: 0.000322259 kg
- corrugated board box: 0.00338269, 0.00785157, 0.000126005 kg (3 suppliers, which the file names only by identifier); sum of these 0.0113603 kg
- diesel, low-sulfur: 9.74313e-9, 2.34814e-7, 1.22058e-7, 4.41259e-9, 6.52346e-10, 1.96652e-8, 9.83589e-9 kg (7 suppliers, which the file names only by identifier); sum of these 4.01181e-7 kg
- electricity, low voltage: 0.00262132, 0.00519486, 0.0499021, 0.000890179, 0.0178349, 0.000161883, 0.0123624, 0.00364042 kWh (8 suppliers, which the file names only by identifier); sum of these 0.092608 kWh
- electricity, medium voltage: 0.000186854, 5.83044e-5, 0.00249858, 1.7363e-6, 8.85933e-6, 0.000534947, 2.92609e-5 kWh (7 suppliers, which the file names only by identifier); sum of these 0.00331854 kWh
- ethylene glycol monoethyl ether: 6.74918e-5 kg
- ethylene vinyl acetate copolymer: 2.6608e-5, 1.16354e-5 kg (2 suppliers, which the file names only by identifier); sum of these 3.82435e-5 kg
- extrusion, plastic film: 0.000226339 kg
- hazardous waste, for incineration: -2.23338e-5, -9.5176e-6, -2.48784e-7 kg (3 suppliers, which the file names only by identifier); sum of these -3.21002e-5 kg
- heat, district or industrial, natural gas: 0.00146855, 0.054235, 0.146857, 0.00241324 MJ (4 suppliers, which the file names only by identifier); sum of these 0.204974 MJ
- heavy fuel oil: 3.03913e-6, 2.5573e-8, 1.30008e-7, 1.68575e-7, 3.28063e-8, 4.39162e-8, 1.50429e-6 kg (7 suppliers, which the file names only by identifier); sum of these 4.9443e-6 kg
- industrial furnace, 1MW, oil: 9.18827e-10 unit
- industrial furnace, natural gas: 5.11589e-9 unit
- industrial machine, heavy, unspecified: 2.80786e-5 kg
- isopropanol: 0.000280786 kg
- kraft paper: 0.00515327, 0.0023896 kg (2 suppliers, which the file names only by identifier); sum of these 0.00754287 kg
- lead: 0.000568693 kg
- light fuel oil: 1.57014e-6, 1.55849e-7, 1.49851e-8, 8.04472e-7, 1.11364e-8, 1.0342e-8, 7.72203e-8 kg (7 suppliers, which the file names only by identifier); sum of these 2.64415e-6 kg
- maintenance, transmission network, electricity, high voltage direct current subsea cable: 9.13563e-7 km*year
- maize starch: 7.10429e-5 kg
- municipal solid waste: -4.17872e-7, -0.00012953, -1.5047e-7, -0.000295536, -1.05293e-7 kg (5 suppliers, which the file names only by identifier); sum of these -0.000425739 kg
- natural gas, high pressure: 2.6858e-7, 1.13368e-7, 6.49291e-7, 1.92685e-7, 1.09003e-5, 1.1141e-6, 1.21613e-7, 3.58863e-9, 4.3183e-7, 4.53473e-7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 m3 (26 suppliers, which the file names only by identifier); sum of these 4.68488e-5 m3
- oil storage, 3000l: 1.14851e-8 unit
- packaging box factory: 1.11497e-11 unit
- packaging film, low density polyethylene: 0.000187315 kg
- paper, woodfree, coated: 0.179034 kg
- polyethylene, high density, granulate: 0.000226339 kg
- polypropylene, granulate: 7.4227e-5 kg
- potato starch: 4.88891e-5 kg
- printing ink, offset, without solvent, in 47.5% solution state: 2.58829e-5, 0.00125318 kg (2 suppliers, which the file names only by identifier); sum of these 0.00127906 kg
- scrap copper: -1.44421e-6, -3.07817e-5 kg (2 suppliers, which the file names only by identifier); sum of these -3.22259e-5 kg
- scrap steel: -1.01727e-7, -8.02918e-5 kg (2 suppliers, which the file names only by identifier); sum of these -8.03935e-5 kg
- sheet rolling, aluminium: 0.00320715 kg
- spent solvent mixture: -0.000138921, -5.42811e-5 kg (2 suppliers, which the file names only by identifier); sum of these -0.000193202 kg
- steel, low-alloyed: 0.000803935 kg
- synthetic rubber: 2.30554e-5 kg
- textile, woven cotton: 3.63219e-5 kg
- thermoforming, with calendering: 5.12628e-5 kg
- waste emulsion paint: -3.3193e-5, -3.12891e-6 kg (2 suppliers, which the file names only by identifier); sum of these -3.63219e-5 kg
- waste paper, unsorted: -8.2541e-5, -0.0251824, -0.0251988 kg (3 suppliers, which the file names only by identifier); sum of these -0.0504637 kg
- waste paperboard, unsorted: -0.00568013, -0.00568013 kg (2 suppliers, which the file names only by identifier); sum of these -0.0113603 kg
- waste plastic, mixture: -1.1983e-6, -6.05523e-9, -1.33599e-8, -4.26402e-6, -8.38874e-6, -8.00656e-8, -3.1403e-8, -3.307e-8 kg (8 suppliers, which the file names only by identifier); sum of these -1.4015e-5 kg
- waste wire plastic: -7.4227e-5 kg
- white spirit: 0.000392843 kg
- wire drawing, copper: 0.000322259 kg
- zinc coat, coils: 1.29041e-5 m2

## Inputs from nature
- Occupation, seabed, infrastructure [natural resource, land]: 0.000100492 m2*year
- Transformation, from seabed, unspecified [natural resource, land]: 2.5123e-6 m2
- Transformation, to seabed, infrastructure [natural resource, land]: 2.5123e-6 m2
- Water, unspecified natural origin [natural resource, in water]: 5.68189e-6 m3

## Emissions to nature
- 2-Propanol [air, urban air close to ground]: 0.000280786 kg
- Acetaldehyde [air, urban air close to ground]: 3.19385e-11 kg
- Acetic acid [air, urban air close to ground]: 3.94511e-10 kg
- Acetone [air, urban air close to ground]: 3.01114e-11 kg
- Ammonia [air, urban air close to ground]: 2.15121e-11 kg
- Arsenic ion [air, urban air close to ground]: 2.60966e-12 kg
- Benzene [air, urban air close to ground]: 7.32791e-10 kg
- Benzene, ethyl- [air, urban air close to ground]: 1.24808e-5 kg
- Benzo(a)pyrene [air, urban air close to ground]: 2.75327e-14 kg
- Butane [air, urban air close to ground]: 1.31993e-9 kg
- Calcium [air, urban air close to ground]: 2.20817e-11 kg
- Carbon dioxide, fossil [air, urban air close to ground]: 0.000127799 kg
- Carbon monoxide, fossil [air, urban air close to ground]: 5.76224e-9 kg
- Chromium III [air, urban air close to ground]: 9.93675e-13 kg
- Chromium VI [air, urban air close to ground]: 1.00371e-14 kg
- Cobalt II [air, urban air close to ground]: 6.62451e-12 kg
- Copper ion [air, urban air close to ground]: 9.42335e-11 kg
- Dinitrogen monoxide [air, urban air close to ground]: 4.21323e-10 kg
- Dioxins, measured as 2,3,7,8-tetrachlorodibenzo-p-dioxin [air, urban air close to ground]: 2.03661e-19 kg
- Ethanol [air, urban air close to ground]: 6.02229e-11 kg
- Formaldehyde [air, urban air close to ground]: 3.90073e-10 kg
- Heptane [air, urban air close to ground]: 0.000122103 kg
- Hydrocarbons, aliphatic, alkanes, unspecified [air, urban air close to ground]: 1.82861e-10 kg
- Hydrocarbons, aliphatic, unsaturated [air, urban air close to ground]: 6.02229e-12 kg
- Hydrocarbons, aromatic [air, urban air close to ground]: 3.40289e-11 kg
- Hydrochloric acid [air, urban air close to ground]: 3.01293e-10 kg
- Hydrogen fluoride [air, urban air close to ground]: 1.0806e-11 kg
- Iron ion [air, urban air close to ground]: 1.64609e-10 kg
- Lead II [air, urban air close to ground]: 2.91077e-11 kg
- Mercury II [air, urban air close to ground]: 1.4994e-13 kg
- Methane, fossil [air, urban air close to ground]: 4.38647e-9 kg
- Methanol [air, urban air close to ground]: 1.28802e-5 kg
- Molybdenum VI [air, urban air close to ground]: 1.60595e-12 kg
- Nickel II [air, urban air close to ground]: 9.83638e-11 kg
- Nitrogen oxides [air, urban air close to ground]: 5.9281e-8 kg
- PAH, polycyclic aromatic hydrocarbons [air, urban air close to ground]: 1.84629e-11 kg
- Particulate Matter, < 2.5 um [air, urban air close to ground]: 2.06466e-9 kg
- Particulate Matter, > 10 um [air, urban air close to ground]: 4.81783e-10 kg
- Particulate Matter, > 2.5 um and < 10um [air, urban air close to ground]: 2.40892e-10 kg
- Pentane [air, urban air close to ground]: 2.21983e-9 kg
- Propane [air, urban air close to ground]: 3.74056e-10 kg
- Propionic acid [air, urban air close to ground]: 3.6542e-11 kg
- Propylene oxide [air, urban air close to ground]: 2.34418e-5 kg
- Selenium IV [air, urban air close to ground]: 2.40892e-12 kg
- Sodium [air, urban air close to ground]: 1.50558e-10 kg
- Sulfur dioxide [air, urban air close to ground]: 8.61883e-8 kg
- Toluene [air, urban air close to ground]: 1.10257e-5 kg
- Vanadium V [air, urban air close to ground]: 2.00743e-10 kg
- Water [air, non-urban air or from high stacks]: 3.38728e-6 m3
- Xylene [air, urban air close to ground]: 1.10254e-5 kg
- Zinc II [air, urban air close to ground]: 1.02063e-10 kg
- BOD5, Biological Oxygen Demand [water, surface water]: 4.00246e-8 kg
- COD, Chemical Oxygen Demand [water, unspecified]: 3.20777e-6 kg
- DOC, Dissolved Organic Carbon [water, unspecified]: 1.18806e-6 kg
- TOC, Total Organic Carbon [water, unspecified]: 1.18806e-6 kg
- Water [water, unspecified]: 2.29461e-6 m3

## Sampling procedure
environmental report

## Review by Roberto Dones 2004-07-01
passed
