# [sulfonyl]urea-compound production

Dataset: EcoSpold 2, unit process
Geography: RER
Time period: 2000-01-01 to 2022-12-31
Technology level: current
Classification: ISIC rev.4 ecoinvent: 2021:Manufacture of pesticides and other agrochemical products
Classification: EcoSpold01Categories: agricultural means of production/pesticides
Tags: ConvertedDataset
Scenario: Business-as-Usual
System model: Allocation at the point of substitution
Share of production covered: 100 %
Generated by: Jürgen Sutter
Published in: Nemecek, T. 2007
Database: ecoinvent
isCopyrightProtected: true

## General comment
This dataset represents the production of (sulfonyl)urea-compounds (1 kg of active ingredient). Raw materials are modelled with a stoichiometric calculation. Energy consumption is modelled with data from a similar process. The emissions are estimated. Infrastructure is included with a default value.
[This dataset was already contained in the ecoinvent database version 2. It was not individually updated during the transfer to ecoinvent version 3. Life Cycle Impact Assessment results may still have changed, as they are affected by changes in the supply chain, i.e. in other datasets. This dataset was generated following the ecoinvent quality guidelines for version 2. It may have been subject to central changes described in the ecoinvent version 3 change report (http://www.ecoinvent.org/database/ecoinvent-version-3/reports-of-changes/), and the results of the central updates were reviewed extensively. The changes added e.g. consistent water flows and other information throughout the database. The documentation of this dataset can be found in the ecoinvent reports of version 2, which are still available via the ecoinvent website. The change report linked above covers all central changes that were made during the conversion process.]

## Included activities start
From reception of precursors (acetic anhydride, acetonitrile, acrylonitrile, aluminium, ammonia, ammonium chloride, calcium carbide, carbon dioxide, chlorine, cumene, dichloromethane, dimethylamine, dimethylsulfate, ethanol, hydrochloric acid, hydrogen, hydrogen cyanide, hydrogen fluoride, hydrogen sulfide, natural gas, nitrogen, oxygen, methanol, nitric acid, o-dichlorobenzene, p-dichlorobenzene, phosgene, 1-propanol, propylene, sodium chloride, sodium hydroxide, sulfur, sulfuric acid, sulfur dioxide, sulfur trioxide, toluene, water decarbonised) at the factory gate.

## Included activities end
This activity ends with (sulfonyl)urea-compounds at the factory gate. The dataset includes the input materials, energy uses, infrastructure and emissions. The dataset doesn't include emulsives, additives etc.

## Geography
The inventory is modelled for Europe.

## Technology
[Sulfonyl]ureas are herbicidal compounds with a urea functional group (ureas) or a urea functional group having a sulfonyl substituent (sulfonyl ureas). Ureas are produced by phosgenation of an amine with an amination of the resulting isocyanate. Sulfonylureas are usually produced by reacting a sulfonamide with an amine, or a sulfonamide isocyanate with an amine, or a sulfonamide carbamate with an amine.

The dataset [sulfonyl]urea-compounds was calculated from the arithmetic mean of all inputs and outputs of the production of amidosulfuron, chlorotoluron, diuron, isoproturon, lufenuron, metsulfuron-methyl, nicosulfuron, and thifensulfuron-methyl.

Amidosulfuron is produced in five steps from methane:
CH4 + SO3 → CH4SO3
CH4SO3 + SOCl2 → CH3ClO2S + SO2 + HCl
CH3ClO2S + CH5N → C2H7NSO2 + HCl
C2H7NSO2 + CClNO3S → C3H6N2S2O5 + HCl
C3H6N2O5S2 + C6H9N3O2 → C9H15N5O7S2
Precursors that are used for the amidosulfuron production are amino-4,6-dimethoxy pyrimidine (C6H9N3O2), chlorosulfonyl isocyanate sulfonamide (CClNO3S), dimethyl malonate (C5H8O4), and thionyl chloride (SOCl2).

Chlorotoluron is produced in five steps from toluene:
C7H8 + HNO3 → C7H7NO2 + H2O
C7H7NO2 + Cl2 → C7H6ClNO2 + HCl
C7H6ClNO2 + 3 H2 → C7H8ClN + 2 H2O
C7H8ClN + COCl2 → C8H6ClNO + 2 HCl
C8H6ClNO + C2H7N → C10H14ClN2O

Diuron is produced in four steps from dichlorobenzene:
C6H4Cl2 + HNO3 → C6H3Cl2NO2 + H2O
C6H3Cl2NO2 + 3 H2 → C6H5Cl2N + 2 H2O
C6H5Cl2N + COCl2 → C7H3Cl2ON + 2 HCl
C7H3Cl2NO + C2H7N → C9H10Cl2N2O

Isoproturon is produced in four steps from cumene:
C9H12 + HNO3 → C9H11NO2 + H2O
C9H11NO2 + 3 H2 → C9H14N + 2 H2O
C9H14N + COCl2 → C10H11NO + 2 HCl
C10H11NO + C2H7N → C12H18N2O

Lufenuron is produced in five steps from 1,4-dichlorobenzene:
C6H4Cl2 + Cl2 → C6H3Cl3 + HCl
C6H3Cl3 + C3H2F6O → C9H4Cl2F6O + HCl
C9H4Cl2F6O + HNO3 → C9H3Cl2F6NO3 + H2O
C9H3Cl2F6NO3 + 3 H2 → C9H5Cl2F6NO + 2 H2O
C9H5Cl2F6NO + C8H3F2NO2 → C17H8Cl2F8N2O3
Precursors that are used for the lufenuron production are 2,4-difluorobenzyl isocyanate (C8H3F2NO2) and 1,1,2,3,3,3-hexafluoropropanol (C3H2F6O).

Metsulfuron-methyl is produced in seven steps from sulfur trioxide:
SO3 + HCl → ClSO2OH
HSO3Cl + C7H8 → C7H7ClO2S + H2O
C7H7ClO2S + NH3 → C7H9NO2S + HCl
C7H9NO2S + H2O → C7H5NO3S + 3 H2
C7H5NO3S + CH4O → C8H9NO4S
C8H9NO4S + C3H5ClO2 → C11H14NO6S + HCl
C11H14NO6S + C5H8N4O → C14H15N5O6S + C2H6O
Precursors that are used for the metsulfuron-methyl production are 2-amino-4-methoxy-6-methyl-1,3,5-triazine (C5H8N4O), cyanamide (CH2N2), ethyl-chloro formate (C3H5ClO2), and o-methyl-isourea (C2H6N2O).

Nicosulfuron is produced in eleven steps from propene:
C3H6 + O2 → C3H4O + H2O
2 C3H4O + NH3 → C6H7N + 2 H2O
C6H7N + 4 Cl2 → C6H3Cl4N + 4 HCl
C6H3Cl4N + 2 H2O → C6H4ClNO2 + 3 HCl
C6H4ClNO2 + H2S → C6H5NO2S + HCl
C6H5NO2S + CH4O → C7H7NO2S + H2O
C7H7NO2S + 2 H2O + 3 Cl2 → C7H6ClNO4S + 5 HCl
C7H6ClNO4S + C4H11N → C11H16N2O4S + HCl
C11H16N2O4S + C4H12NAl → C12H19N3O3S + C3H9OAl
C12H19N3O3S + C2HF3O2 → C8H11N3O3S + C6H9F3O2
C8H11N3O3S + C7H7N3O3 → C15H18N6O6S
Precursors that are used for the nicosulfuron production are tert-butyl amine (C4H11N), (N,N-dimethyl amino)-dimethyl aluminium (C4H12NAl), dimethyl malonate (C5H8O4), 2-isocyanato-4,6-dimethoxy pyrimidine (C7H7N3O3), sodium (Na), and trifluoroacetic acid (C2HF3O2).

Thifensulfuron-methyl is produced in nine steps from acetic acid:
C2H4O2 + Cl2 → C2H3ClO2 + HCl
C2H3ClO2 + NaSH → C2H4O2S + NaCl
C2H4O2S + CH4O → C3H6O2S + H2O
C3H6O2S + CH2ClN3 → C6H7NO2S + HCl
C6H7NO2S + 2 NaNO2 + HCl → C6H5ClN2O2S + 2 H2O + NaCl
C6H5ClN2O2S + SO2 → C6H5ClO4S2 + N2
C6H5ClO4S2 + NH3 → C6H7NO4S2 + HCl
C6H7NO4S2 + COCl2 → C7H5NO5S2 + 2 HCl
C7H5NO5S2 + C5H8N4O → C12H14N5O6S2
Precursors that are used for the thifensulfuron-methyl production are 2-amino-4-methoxy-6-methyl-1,3,5-triazine (C5H8N4O), chloroacrylonitrile (CH2ClN3), cyanamide (CH2N2), sodium hydrogensulfide (NaSH), and sodium nitrite (NaNO2).

Precursors :

Amino-4,6-dimethoxy pyrimidine (C6H9N3O2) is produced in five steps from calcium carbide:
CaC2 + N2 → CaCN2 + C
CaCN2 + CO2 + H2O → CH2N2 + CaCO3
CH2N2 → C2H4N4
C2H4N4 + 2 NH4Cl → CH5N3 + 2 HCl
CH5N3 + C5H8O4 → C6H9N3O2 + 2 H2O

2-Amino-4-methoxy-6-methyl-1,3,5-triazine (C5H8N4O) is produced in three steps from acetonitrile:
C2H3N + CH4O → C3H7NO
C3H7NO + CH2N2 → C4H6N2O + NH3
C4H6N2O + C2H6N2O → C5H8N4O + CH4O

tert-Butyl amine (C4H11N) is produced in two steps from 2-methylpropene:
C4H8 + H2O + HCN + H2SO4 → C5H11NO + H2SO4
C5H11NO + H2O + H2SO4 + 3 NaOH → C4H11N + NaCHO2 + Na2SO4 + 3 H2O

Chloroacrylonitrile (CH2ClN3) is produced from acrylonitrile and chlorine:
C3H3N + Cl2 → CH2ClN3 + HCl

Chlorosulfonyl isocyanate sulfonamide (CClNO3S) is produced in three steps from hydrogen chloride and sulfur trioxide:
HCl + SO3 → ClSO2OH
HSO3Cl + NH3 → H2SNO2Cl + H2O
H2SNO2Cl + COCl2 → CClNO3S + 2 HCl

Cyanamide (CH2N2) is produced in two steps from calcium carbide:
CaC2 + N2 → CaCN2 + C
CaCN2 + CO2 + H2O → CH2N2 + CaCO3

2,4-Difluorobenzyl isocyanate (C8H3F2NO2) is produced in five steps from toluene:
C7H8 + 2 Cl2 → C7H6Cl2 + 2 HCl
C7H6Cl2 + 2 HF → C7H6F2 + 2 HCl
C7H6F2 + HNO3 → C7H4F2O2 + H2O
C7H4F2O2 + NH3 → C7H5F2NO + H2O
C7H5F2NO + COCl2 → C8H3F2NO2 + 2 HCl

(N,N-Dimethyl amino)-dimethyl aluminium (C4H12NAl) is produced in three steps from methylchloride:
3 CH3Cl + 2 Al → C3H9Al2Cl3
C3H9Al2Cl3 + 3 CH3Cl + 6 Na → C6H18Al2 + 6 NaCl
C6H18Al2 + 2 C2H7N → 2 C4H12NAl + 2 CH4

Dimethyl malonate (C5H8O4) is produced in four steps from acetic acid:
C2H4O2 + Cl2 → C2H3ClO2 + HCl
C2H3ClO2 + HCN → C3H3NO2 + HCl
C3H3NO2 + NaOH → NaC3H2NO2 + H2O
NaC3H2NO2 + 2 CH4O + HCl → C5H8O4 + NH3 + NaCl

Ethyl chloroformate (C3H5ClO2) is produced from ethanol and phosgene:
C2H6O + CCl2O → C3H5ClO2 + HCl

1,1,2,3,3,3-Hexafluoropropanol (C3H2F6O) is produced in two steps from propanol:
C3H8O + 6 Cl2 → C3H2Cl6O + 6 HCl
C3H2Cl6O + 6 HF → C3H2F6O + 6 HCl

2-Isocyanato-4,6-dimethoxy pyrimidine (C7H7N3O3) is produced in two steps from calcium carbide:
CaC2 + N2 → CaCN2 + C
CaCN2 + CO2 + H2O → CH2N2 + CaCO3
CH2N2 → C2H4N4
C2H4N4 + 2 NH4Cl → CH5N3 + 2 HCl
CH5N3 + C5H8O4 → C6H9N3O2 + 2 H2O
C6H9N3O2 + COCl2 → C7H7N3O3 + 2 HCl

o-Methyl-isourea (C2H6N2O) is produced from cyanamide and methanol:
CH2N2 + CH4O → C2H6N2O

Sodium (Na) is produced by electrolysis of sodium chloride:
2 NaCl → 2 Na + Cl2

Sodium hydrogen sulfide (NaSH) is produced from hydrogen sulfide and sodium hydroxide:
H2S + NaOH → NaSH + H2O

Sodium nitrite (NaNO2) is produced in three steps from ammonia:
4 NH3 + 5 O2 → 4 NO + 6 H2O
2 NO + O2 → 2 NO2
NO2+ NO + 2 NaOH → 2 NaNO2 + H2O

Thionyl chloride (SOCl2) is produced in two steps from sulphur:
S + Cl2 → SCl2
SCl2 + SO2 + Cl2 → 2 SOCl2

Trifluoroacetic acid (C2HF3O2) is produced in two steps from acetic acid:
C2H4O2 + 3 Cl2 → C2HCl3O2 + 3 HCl
C2HCl3O2 + 3 HF → C2HF3O2 + 3 HCl

## Time period
Time of publications

## Parameters
- fraction, cooling water, cooling pond system, to air: 0.032 dimensionless; name fraction_CW_CP_to_air; lognormal variance with pedigree 0.0413, pedigree (2,3,1,3,1)
  Calculated based on literature value (Scown, C.D., 2011, Water Footprint of U.S. Transportation Fuels and supplying information of the article) (Vionnet, S., Quantis Water Database - Technical Report, 2012).
- fraction, cooling water, once-through system, to air: 0.004 dimensionless; name fraction_CW_OT_to_air; lognormal variance with pedigree 0.0413, pedigree (2,3,1,3,1)
  (same comment as for fraction, cooling water, cooling pond system, to air)
- fraction, cooling water, recirculating system, to air: 0.771 dimensionless; name fraction_CW_R_to_air; lognormal variance with pedigree 0.0413, pedigree (2,3,1,3,1)
  (same comment as for fraction, cooling water, cooling pond system, to air)
- fraction, cooling water, to air: 0.3875 dimensionless; name fraction_CW_to_air; = (0.5*fraction_CW_OT_to_air)+(0.5*fraction_CW_R_to_air); lognormal variance with pedigree 0.092025, pedigree (4,4,3,2,4)
  Calculated value based on literature value (see comments of the other parametres present in this dataset) and expert opinion. In the case when no industry/literature data are available about the type of cooling or directly fraction, cooling water, to air specific for the process a default assumption is applied. It is assumed that the once-through cooling system is used in 50% of all cases and recirculating system is used in another 50% of all cases.
- fraction, water, decarbonised, to air: 0.3875 dimensionless; name fraction_WDC_to_air; = fraction_CW_to_air; lognormal variance with pedigree 0.092025, pedigree (4,4,3,2,4)
  Calculated value. See comments in the other parametres present in this dataset. Decarbonised water is considered to be always used as cooling water, thus cooling water fractions to air are applied to all carbonised water input flows to calculate the amount of water consumed in the processes.

## Reference product
- [sulfonyl]urea-compound: 1 kg; By-product classification allocatable product; CPC 34663: Herbicides, anti-sprouting products and plant-growth regulators
  EcoSpold01Location=RER
  [Sulfonyl]urea-compounds can have different modes of action. Amidosulfuron, metsulfuron-methyl, nicosulfuron, and thifensulfuron-methyl are herbicides and act as acetolactase inhibitors (ALS); chlorotoluron, diuron, and isoproturon are also herbicides but act as inhibitors of photosynthesis at photosystem II site A; and lufenuron is an insecticide and acts as a chitin synthesis inhibitor.
  production volume 4.90002e6 kg
    Unknown
    The addition of the consumption volumes in the US in 2002 (from USGS, 2002 Pesticide use Maps) of the [sulfonyl]urea-compounds benefin (benfluralin), bensulfuron, chlorimuron, chlorsulfuron, cymoxanil, cyprodinil, diflubenzuron, diflufenzopyr , diuron, fluometuron, foramsulfuron, halosulfuron, linuron, metsulfuron, primisulfuron, prosulfuron, rimsulfuron, sulfosulfuron, tebuthiuron, thidiazuron, thifensulfuron, thiophanate, triasulfuron, tribenuron, triflusulfuron has been used to estimate the production volumes of this type of pesticide in the Europe. For that, it has been extrapolated to a Global production mix using the ha of Arable land and Permanent crops of US versus the ha of Arable land and Permanent crops in the Europe in 2002 (299/179 million ha; FAOSTAT).
  property carbon content, fossil 0.540853
    Approximated as an unweighted average of the C-content of the [sulfonyl]urea-compounds (Tab 2.25 Sutter, 2010) chlorotoluron, Diuron, Linuron and Isoproturon.
  property price 5.13 EUR2005
    Calculated value based on data from United Nations Commodity Trade Statistics Database (comtrade.un.org). UN comtrade category: 380890 Pesticides, rodenticides, nes, for retail sale. Year 2005. Using exchange rate of 1EURO = 1.209 USD. Average of price of import into 5 main markets (EU, US, JP, IN and CN).
  properties: carbon allocation 0.540853 kg, carbon content 0.540853, carbon content, non-fossil 0, dry mass 1 kg, water content 0, water in wet mass 0 kg, wet mass 1 kg

## Inputs from technosphere
- 1-propanol: 0.020006 kg; source Unger T A 1996; lognormal variance with pedigree 0.044, pedigree (4,5,4,1,1)
  Stoichiometric calculation, assuming an efficiency of 95% per reaction step.
  EcoSpold01Location=RER
  Uncertainty: Stoechiometric calculation
  properties: carbon content, fossil 0.6, dry mass 1 kg, heating value, net 34.3 MJ, wet mass 1 kg
- acetic anhydride: 0.1199 kg; source Unger T A 1996; lognormal variance with pedigree 0.044, pedigree (4,5,4,1,1)
  EcoSpold01Location=RER
  Stoichiometric calculation, assuming an efficiency of 95% per reaction step.
  Further references:
  Strittmatter et al. 2007. Harald Strittmatter, Stefan Hildbrand, Peter Pollak: Malonic Acid and Derivatives. In: Ullmann's Encyclopedia of Industrial Chemistry, Seventh Edition, 2009 Electronic Release (ed. Fiedler E., Grossmann G., Kersebohm D., Weiss G. and Witte C.). 7 th Electronic Release Edition. Wiley InterScience, New York, Article Online Posting Date: April 15, 2007. Online-Version under: DOI: 10.1002/1435 6007.a16_063.pub2
  Uncertainty: Stoechiometric calculation
  properties: carbon content, fossil 0.470588, dry mass 1 kg, heating value, net 21.38 MJ, wet mass 1 kg
- acetonitrile: 0.11563 kg; source Unger T A 1996; lognormal variance with pedigree 0.044, pedigree (4,5,4,1,1)
  (same comment as for 1-propanol)
  properties: carbon content, fossil 0.585366, dry mass 1 kg, heating value, net 26.59 MJ, wet mass 1 kg
- acrylonitrile: 0.024514 kg; source Unger T A 1996; lognormal variance with pedigree 0.044, pedigree (4,5,4,1,1)
  EcoSpold01Location=RER
  Stoichiometric calculation, assuming an efficiency of 95% per reaction step.
  Uncertainty: Stoechiometric calculation
  properties: carbon content, fossil 0.679245, dry mass 1 kg, heating value, net 27.43 MJ, wet mass 1 kg
- aluminium, cast alloy: 0.00358336 kg; source Unger T A 1996; lognormal variance with pedigree 0.044, pedigree (4,5,4,1,1)
  (same comment as for 1-propanol)
  properties: dry mass 1 kg, wet mass 1 kg
- aluminium, wrought alloy: 0.00761464 kg; source Unger T A 1996; lognormal variance with pedigree 0.044, pedigree (4,5,4,1,1)
  (same comment as for 1-propanol)
  properties: dry mass 1 kg, wet mass 1 kg
- ammonia, anhydrous, liquid: 0.04204 kg; source Unger T A 1996; lognormal variance with pedigree 0.044, pedigree (4,5,4,1,1)
  Stoichiometric calculation, assuming an efficiency of 95% per reaction step.
  Further references:
  Arntz et al. 2007. Dietrich Arntz, Achim Fischer, Mathias Höpp, Sylvia Jacobi, Jörg Sauer, Takashi Ohara, Takahisa Sato, Noboru Shimizu, Helmut Schwind: Acrolein and Methacrolein. In: Ullmann's Encyclopedia of Industrial Chemistry, Seventh Edition, 2009 Electronic Release (ed. Fiedler E., Grossmann G., Kersebohm D., Weiss G. and Witte C.). 7 th Electronic Release Edition. Wiley InterScience, New York, Article Online Posting Date: April 15, 2007. Online-Version under: DOI: 10.1002/14356007.a01_149.pub2
  Eller et al. 2000. Karsten Eller, Erhard Henkes, Roland Rossbacher, Hartmut Höke: Amines, Aliphatic. In: Ullmann's Encyclopedia of Industrial Chemistry, Seventh Edition, 2009 Electronic Release (ed. Fiedler E., Grossmann G., Kersebohm D., Weiss G. and Witte C.). 7 th Electronic Release Edition. Wiley InterScience, New York, Article Online Posting Date: June 15, 2000. Online-Version under: DOI: 10.1002/14356007.a02_001
  Güthner et al. 2006. Thomas Güthner and Bernd Mertschenk: Cyanamides. In: Ullmann's Encyclopedia of Industrial Chemistry, Seventh Edition, 2009 Electronic Release (ed. Fiedler E., Grossmann G., Kersebohm D., Weiss G. and Witte C.). 7 th Electronic Release Edition. Wiley InterScience, New York, Article Online Posting Date: July 15, 2006. Online-Version under: DOI: 10.1002/14356007.a08_139.pub2
  Kim et al. 2003. Kim S., Overcash M.: Energy in chemical manufacturing processes: gate-to-gate information for life cycle assessment. In: Journal of Chemical Technology & Biotechnology vol. 78, no. 9: 995-1005(11). 2003
  Laue et al. 2000. Wolfgang Laue, Michael Thiemann, Erich Scheibler, Karl Wilhelm Wiegand: Nitrates and Nitrites. In: Ullmann's Encyclopedia of Industrial Chemistry, Seventh Edition, 2009 Electronic Release (ed. Fiedler E., Grossmann G., Kersebohm D., Weiss G. and Witte C.). 7 th Electronic Release Edition. Wiley InterScience, New York, Article Online Posting Date: June 15, 2000. Online-Version under: DOI: 10.1002/14356007.a17_265
  Shimizu et al. 2000. Shinkichi Shimizu, Nanao Watanabe, Toshiaki Kataoka, Takayuki Shoji, Nobuyuki Abe, Sinji Morishita, Hisao Ichimura: Pyridine and Pyridine Derivatives. In: Ullmann's Encyclopedia of Industrial Chemistry, Seventh Edition, 2009 Electronic Release (ed. Fiedler E., Grossmann G., Kersebohm D., Weiss G. and Witte C.). 7 th Electronic Release Edition. Wiley InterScience, New York, Article Online Posting Date: June 15, 2000. Online-Version under: DOI: 10.1002/14356007.a22_399
  Thiemann et al. 2000. Michael Thiemann, Erich Scheibler, Karl Wilhelm Wiegand: Nitric Acid, Nitrous Acid, and Nitrogen Oxides. In: Ullmann's Encyclopedia of Industrial Chemistry, Seventh Edition, 2009 Electronic Release (ed. Fiedler E., Grossmann G., Kersebohm D., Weiss G. and Witte C.). 7 th Electronic Release Edition. Wiley InterScience, New York, Article Online Posting Date: June 15, 2000. Online-Version under: DOI: 10.1002/14356007.a17_293
  EcoSpold01Location=RER
  Uncertainty: Stoechiometric calculation
  properties: dry mass 1 kg, wet mass 1 kg
- ammonium chloride: 0.081558 kg; source Unger T A 1996; lognormal variance with pedigree 0.044, pedigree (4,5,4,1,1)
  EcoSpold01Location=GLO
  Stoichiometric calculation, assuming an efficiency of 95% per reaction step.
  Further references:
  Güthner et al. 2006. Thomas Güthner and Bernd Mertschenk: Cyanamides. In: Ullmann's Encyclopedia of Industrial Chemistry, Seventh Edition, 2009 Electronic Release (ed. Fiedler E., Grossmann G., Kersebohm D., Weiss G. and Witte C.). 7 th Electronic Release Edition. Wiley InterScience, New York, Article Online Posting Date: July 15, 2006. Online-Version under: DOI: 10.1002/14356007.a08_139.pub2
  Güthner et al. 2006. Thomas Güthner, Bernd Mertschenk, Bernd Schulz: Guanidine and Derivatives. In: Ullmann's Encyclopedia of Industrial Chemistry, Seventh Edition, 2009 Electronic Release (ed. Fiedler E., Grossmann G., Kersebohm D., Weiss G. and Witte C.). 7 th Electronic Release Edition. Wiley InterScience, New York, Article Online Posting Date: July 15, 2006. Online-Version under: DOI: 10.1002/14356007.a12_545.pub2
  Uncertainty: Stoechiometric calculation
  properties: dry mass 1 kg, wet mass 1 kg
- calcium carbide, technical grade: 0.14665 kg; source Unger T A 1996; lognormal variance with pedigree 0.044, pedigree (4,5,4,1,1)
  EcoSpold01Location=RER
  Stoichiometric calculation, assuming an efficiency of 95% per reaction step.
  Further references:
  Güthner et al. 2006. Thomas Güthner and Bernd Mertschenk: Cyanamides. In: Ullmann's Encyclopedia of Industrial Chemistry, Seventh Edition, 2009 Electronic Release (ed. Fiedler E., Grossmann G., Kersebohm D., Weiss G. and Witte C.). 7 th Electronic Release Edition. Wiley InterScience, New York, Article Online Posting Date: July 15, 2006. Online-Version under: DOI: 10.1002/14356007.a08_139.pub2
  Güthner et al. 2006. Thomas Güthner, Bernd Mertschenk, Bernd Schulz: Guanidine and Derivatives. In: Ullmann's Encyclopedia of Industrial Chemistry, Seventh Edition, 2009 Electronic Release (ed. Fiedler E., Grossmann G., Kersebohm D., Weiss G. and Witte C.). 7 th Electronic Release Edition. Wiley InterScience, New York, Article Online Posting Date: July 15, 2006. Online-Version under: DOI: 10.1002/14356007.a12_545.pub2
  Uncertainty: Stoechiometric calculation
  properties: carbon content, fossil 0.375, dry mass 1 kg, heating value, net 11.36 MJ, wet mass 1 kg
- carbon dioxide, liquid: 0.095782 kg; source Unger T A 1996; lognormal variance with pedigree 0.044, pedigree (4,5,4,1,1)
  (same comment as for calcium carbide, technical grade)
  properties: carbon content, fossil 0.272727, dry mass 1 kg, heating value, net 8.27 MJ, wet mass 1 kg
- chemical factory, organics: 2.5948e-9 unit; lognormal variance with pedigree 0.448, pedigree (4,5,5,5,5)
  EcoSpold01Location=RER
  Estimation, based on a production capacity of 50,000 t per year and a plant life time of 50 years, therefore an amount of 4X10-10 units per kg of produced chemical is aded to the unit process of the respective chemical. The amount is accounted for each production step. This might be an overestimation in some multistep syntheses.
  Uncertainty: Estimation
- chlorine, liquid: 0.72929 kg; source Unger T A 1996; lognormal variance with pedigree 0.044, pedigree (4,5,4,1,1)
  EcoSpold01Location=RER
  Stoichiometric calculation, assuming an efficiency of 95% per reaction step.
  Further references:
  Arntz et al. 2007. Dietrich Arntz, Achim Fischer, Mathias Höpp, Sylvia Jacobi, Jörg Sauer, Takashi Ohara, Takahisa Sato, Noboru Shimizu, Helmut Schwind: Acrolein and Methacrolein. In: Ullmann's Encyclopedia of Industrial Chemistry, Seventh Edition, 2009 Electronic Release (ed. Fiedler E., Grossmann G., Kersebohm D., Weiss G. and Witte C.). 7 th Electronic Release Edition. Wiley InterScience, New York, Article Online Posting Date: April 15, 2007. Online-Version under: DOI: 10.1002/14356007.a01_149.pub2
  Kim et al. 2003. Kim S., Overcash M.: Energy in chemical manufacturing processes: gate-to-gate information for life cycle assessment. In: Journal of Chemical Technology & Biotechnology vol. 78, no. 9: 995-1005(11). 2003
  Shimizu et al. 2000. Shinkichi Shimizu, Nanao Watanabe, Toshiaki Kataoka, Takayuki Shoji, Nobuyuki Abe, Sinji Morishita, Hisao Ichimura: Pyridine and Pyridine Derivatives. In: Ullmann's Encyclopedia of Industrial Chemistry, Seventh Edition, 2009 Electronic Release (ed. Fiedler E., Grossmann G., Kersebohm D., Weiss G. and Witte C.). 7 th Electronic Release Edition. Wiley InterScience, New York, Article Online Posting Date: June 15, 2000. Online-Version under: DOI: 10.1002/14356007.a22_399
  Strittmatter et al. 2007. Harald Strittmatter, Stefan Hildbrand, Peter Pollak: Malonic Acid and Derivatives. In: Ullmann's Encyclopedia of Industrial Chemistry, Seventh Edition, 2009 Electronic Release (ed. Fiedler E., Grossmann G., Kersebohm D., Weiss G. and Witte C.). 7 th Electronic Release Edition. Wiley InterScience, New York, Article Online Posting Date: April 15, 2007. Online-Version under: DOI: 10.1002/1435 6007.a16_063.pub2
  Uncertainty: Stoechiometric calculation
  properties: dry mass 1 kg, wet mass 1 kg
- cumene: 0.089398 kg; source Unger T A 1996; lognormal variance with pedigree 0.044, pedigree (4,5,4,1,1)
  (same comment as for 1-propanol)
  properties: carbon content, fossil 0.9, dry mass 1 kg, heating value, net 39.35 MJ, wet mass 1 kg
- dichloromethane: 0.060657 kg; source Unger T A 1996; lognormal variance with pedigree 0.044, pedigree (4,5,4,1,1)
  (same comment as for 1-propanol)
  properties: carbon content, fossil 0.142857, dry mass 1 kg, heating value, net 7.14 MJ, wet mass 1 kg
- dimethyl sulfate: 0.099038 kg; source Unger T A 1996; lognormal variance with pedigree 0.044, pedigree (4,5,4,1,1)
  (same comment as for acrylonitrile)
  properties: carbon content, fossil 0.190476, dry mass 1 kg, heating value, net 11.54 MJ, wet mass 1 kg
- dimethylamine: 0.012248 kg; source Unger T A 1996; lognormal variance with pedigree 0.044, pedigree (4,5,4,1,1)
  (same comment as for 1-propanol)
  properties: carbon content, fossil 0.533333, dry mass 1 kg, heating value, net 13.47 MJ, wet mass 1 kg
- electricity, medium voltage: 2.08104 kWh; source Gendorf 2000; lognormal variance with pedigree 0.044, pedigree (4,5,4,1,1)
  EcoSpold01Location=UCTE
  Estimation, assuming a default value, originated from calculation of avarage consumption of electricity and heat per kg of product (3.2 MJ kg-1), and a resulting amount of electricity of 0,333 kW for every reaction step per kg reaction product, considering that the demand is made up of a mix that inlcudes 38% electricity. Additionally, reaction steps are approximated with energy consumption data, assuming that inventory flows can be estimated using process data for basic operation steps, available for specific organic chemicals.
  Uncertainty: Estimation
- ethanol, without water, in 99.7% solution state, from ethylene: 0.021348 kg; source Unger T A 1996; lognormal variance with pedigree 0.044, pedigree (4,5,4,1,1)
  (same comment as for acrylonitrile)
  properties: carbon content, fossil 0.521739, dry mass 1 kg, heating value, net 28.1 MJ, wet mass 1 kg
  note on heating value, net: Based on literature, page 275, Report 17: Jungbluth, N., Chudacoff, M., Dauriat, A., Dinkel, F., Doka, G., Faist Emmenegger, M., Gnansounou, E., Kljun, N., Schleiss, K., Spielmann, M., Stettler, C., Sutter, J. 2007: Life Cycle Inventories of Bioenergy. ecoinvent report No. 17, Swiss Centre for Life Cycle Inventories, Dübendorf, CH.
- heat, district or industrial, natural gas: 10.9714 MJ; source Gendorf 2000; lognormal variance with pedigree 0.044, pedigree (4,5,4,1,1)
  Estimation, assuming a default value, originated from calculation of avarage consumption of electricity and heat per kg of product (3.2 MJ kg-1), and a resulting amount of heat of 2 MJ for every reaction step per kg reaction product, considering that the demand is made up of a mix that includes 50% natural gas. Additionally, reaction steps are approximated with energy consumption data, assuming that inventory flows can be estimated using process data for basic operation steps, available for specific organic chemicals.
  Uncertainty: Estimation
  properties: heating value, net 1 MJ
- heat, district or industrial, other than natural gas: 6.12375 MJ; source Gendorf 2000; lognormal variance with pedigree 0.044, pedigree (4,5,4,1,1)
  Estimation, assuming a default value, originated from calculation of avarage consumption of electricity and heat per kg of product (3.2 MJ kg-1), and a resulting amount of heat of 2 MJ for every reaction step per kg reaction product, considering that the demand is made up of a mix that inlcudes 12% steam from external energy sources. Additionally, reaction steps are approximated with energy consumption data, assuming that inventory flows can be estimated using process data for basic operation steps, available for specific organic chemicals.
  Uncertainty: Estimation
  properties: heating value, net 1 MJ
- hydrochloric acid, without water, in 30% solution state: 0.093233 kg; source Unger T A 1996; lognormal variance with pedigree 0.044, pedigree (4,5,4,1,1)
  Stoichiometric calculation, assuming an efficiency of 100%.
  Further references:
  Güthner et al. 2006. Thomas Güthner and Bernd Mertschenk: Cyanamides. In: Ullmann's Encyclopedia of Industrial Chemistry, Seventh Edition, 2009 Electronic Release (ed. Fiedler E., Grossmann G., Kersebohm D., Weiss G. and Witte C.). 7 th Electronic Release Edition. Wiley InterScience, New York, Article Online Posting Date: July 15, 2006. Online-Version under: DOI: 10.1002/14356007.a08_139.pub2
  Strittmatter et al. 2007. Harald Strittmatter, Stefan Hildbrand, Peter Pollak: Malonic Acid and Derivatives. In: Ullmann's Encyclopedia of Industrial Chemistry, Seventh Edition, 2009 Electronic Release (ed. Fiedler E., Grossmann G., Kersebohm D., Weiss G. and Witte C.). 7 th Electronic Release Edition. Wiley InterScience, New York, Article Online Posting Date: April 15, 2007. Online-Version under: DOI: 10.1002/1435 6007.a16_063.pub2
  EcoSpold01Location=RER
  Uncertainty: Stoechiometric calculation
  properties: dry mass 1 kg, heating value, net 3.32 MJ, wet mass 1 kg
- hydrogen cyanide: 0.047406 kg; source Unger T A 1996; lognormal variance with pedigree 0.044, pedigree (4,5,4,1,1)
  EcoSpold01Location=RER
  Stoichiometric calculation, assuming an efficiency of 95% per reaction step.
  Further references:
  Eller et al. 2000. Karsten Eller, Erhard Henkes, Roland Rossbacher, Hartmut Höke: Amines, Aliphatic. In: Ullmann's Encyclopedia of Industrial Chemistry, Seventh Edition, 2009 Electronic Release (ed. Fiedler E., Grossmann G., Kersebohm D., Weiss G. and Witte C.). 7 th Electronic Release Edition. Wiley InterScience, New York, Article Online Posting Date: June 15, 2000. Online-Version under: DOI: 10.1002/14356007.a02_001
  Strittmatter et al. 2007. Harald Strittmatter, Stefan Hildbrand, Peter Pollak: Malonic Acid and Derivatives. In: Ullmann's Encyclopedia of Industrial Chemistry, Seventh Edition, 2009 Electronic Release (ed. Fiedler E., Grossmann G., Kersebohm D., Weiss G. and Witte C.). 7 th Electronic Release Edition. Wiley InterScience, New York, Article Online Posting Date: April 15, 2007. Online-Version under: DOI: 10.1002/1435 6007.a16_063.pub2
  Uncertainty: Stoechiometric calculation
  properties: carbon content, fossil 0.444444, dry mass 1 kg, heating value, net 17.95 MJ, wet mass 1 kg
- hydrogen fluoride: 0.072016 kg; source Unger T A 1996; lognormal variance with pedigree 0.044, pedigree (4,5,4,1,1)
  Stoichiometric calculation, assuming an efficiency of 95% per reaction step.
  EcoSpold01Location=GLO
  Uncertainty: Stoechiometric calculation
  properties: dry mass 1 kg, heating value, net 6.06 MJ, wet mass 1 kg
- hydrogen sulfide: 0.033191 kg; source Unger T A 1996; lognormal variance with pedigree 0.044, pedigree (4,5,4,1,1)
  Stoichiometric calculation, assuming an efficiency of 95% per reaction step.
  Further references:
  Arntz et al. 2007. Dietrich Arntz, Achim Fischer, Mathias Höpp, Sylvia Jacobi, Jörg Sauer, Takashi Ohara, Takahisa Sato, Noboru Shimizu, Helmut Schwind: Acrolein and Methacrolein. In: Ullmann's Encyclopedia of Industrial Chemistry, Seventh Edition, 2009 Electronic Release (ed. Fiedler E., Grossmann G., Kersebohm D., Weiss G. and Witte C.). 7 th Electronic Release Edition. Wiley InterScience, New York, Article Online Posting Date: April 15, 2007. Online-Version under: DOI: 10.1002/14356007.a01_149.pub2
  Lange et al. 2000. Ludwig Lange and Wolfgang Triebel: Sulfides, Polysulfides, and Sulfanes. In: Ullmann's Encyclopedia of Industrial Chemistry, Seventh Edition, 2009 Electronic Release (ed. Fiedler E., Grossmann G., Kersebohm D., Weiss G. and Witte C.). 7 th Electronic Release Edition. Wiley InterScience, New York, Article Online Posting Date: June 15, 2000. Online-Version under: DOI: 10.1002/14356007.a25_443
  Shimizu et al. 2000. Shinkichi Shimizu, Nanao Watanabe, Toshiaki Kataoka, Takayuki Shoji, Nobuyuki Abe, Sinji Morishita, Hisao Ichimura: Pyridine and Pyridine Derivatives. In: Ullmann's Encyclopedia of Industrial Chemistry, Seventh Edition, 2009 Electronic Release (ed. Fiedler E., Grossmann G., Kersebohm D., Weiss G. and Witte C.). 7 th Electronic Release Edition. Wiley InterScience, New York, Article Online Posting Date: June 15, 2000. Online-Version under: DOI: 10.1002/14356007.a22_399
  EcoSpold01Location=RER
  Uncertainty: Stoechiometric calculation
  properties: dry mass 1 kg, heating value, net 7.11 MJ, wet mass 1 kg
- hydrogen, liquid: 0.014446 kg; source Unger T A 1996; lognormal variance with pedigree 0.044, pedigree (4,5,4,1,1)
  Stoichiometric calculation, assuming an efficiency of 95% per reaction step.
  Further references:
  Kim et al. 2003. Kim S., Overcash M.: Energy in chemical manufacturing processes: gate-to-gate information for life cycle assessment. In: Journal of Chemical Technology & Biotechnology vol. 78, no. 9: 995-1005(11). 2003
  EcoSpold01Location=RER
  Uncertainty: Stoechiometric calculation
  properties: dry mass 1 kg, heating value, net 120.21 MJ, wet mass 1 kg
- inert waste, for final disposal: -0.0062228 kg; lognormal variance with pedigree 0.036, pedigree (4,5,1,1,1)
  EcoSpold01Location=CH
  Stoechiometric calculation
  Uncertainty: Stoechiometric calculation
  production volume
    Calculated from the production volume of [sulfonyl]urea-compound in proportion to the respective output amounts.
  properties: dry mass 0.995 kg, water content 0.00502513, wet mass 1 kg
- methanol: 0.15134 kg; source Unger T A 1996; lognormal variance with pedigree 0.044, pedigree (4,5,4,1,1)
  EcoSpold01Location=GLO
  Stoichiometric calculation, assuming an efficiency of 95% per reaction step.
  Further references:
  Arntz et al. 2007. Dietrich Arntz, Achim Fischer, Mathias Höpp, Sylvia Jacobi, Jörg Sauer, Takashi Ohara, Takahisa Sato, Noboru Shimizu, Helmut Schwind: Acrolein and Methacrolein. In: Ullmann's Encyclopedia of Industrial Chemistry, Seventh Edition, 2009 Electronic Release (ed. Fiedler E., Grossmann G., Kersebohm D., Weiss G. and Witte C.). 7 th Electronic Release Edition. Wiley InterScience, New York, Article Online Posting Date: April 15, 2007. Online-Version under: DOI: 10.1002/14356007.a01_149.pub2
  Shimizu et al. 2000. Shinkichi Shimizu, Nanao Watanabe, Toshiaki Kataoka, Takayuki Shoji, Nobuyuki Abe, Sinji Morishita, Hisao Ichimura: Pyridine and Pyridine Derivatives. In: Ullmann's Encyclopedia of Industrial Chemistry, Seventh Edition, 2009 Electronic Release (ed. Fiedler E., Grossmann G., Kersebohm D., Weiss G. and Witte C.). 7 th Electronic Release Edition. Wiley InterScience, New York, Article Online Posting Date: June 15, 2000. Online-Version under: DOI: 10.1002/14356007.a22_399
  Strittmatter et al. 2007. Harald Strittmatter, Stefan Hildbrand, Peter Pollak: Malonic Acid and Derivatives. In: Ullmann's Encyclopedia of Industrial Chemistry, Seventh Edition, 2009 Electronic Release (ed. Fiedler E., Grossmann G., Kersebohm D., Weiss G. and Witte C.). 7 th Electronic Release Edition. Wiley InterScience, New York, Article Online Posting Date: April 15, 2007. Online-Version under: DOI: 10.1002/1435 6007.a16_063.pub2
  Uncertainty: Stoechiometric calculation
  properties: carbon content, fossil 0.375, dry mass 1 kg, heating value, net 20 MJ, wet mass 1 kg
  note on heating value, net: Based on literature, page 533, Report 17: Jungbluth, N., Chudacoff, M., Dauriat, A., Dinkel, F., Doka, G., Faist Emmenegger, M., Gnansounou, E., Kljun, N., Schleiss, K., Spielmann, M., Stettler, C., Sutter, J. 2007: Life Cycle Inventories of Bioenergy. ecoinvent report No. 17, Swiss Centre for Life Cycle Inventories, Dübendorf, CH.
- natural gas, high pressure: 0.00854188, 6.12038e-5 m3 (2 suppliers, which the file names only by identifier); sum of these 0.00860309 m3; source Unger T A 1996; lognormal variance with pedigree 0.044, pedigree (4,5,4,1,1)
  EcoSpold01Location=CH
  Stoichiometric calculation, assuming an efficiency of 95% per reaction step.
  Uncertainty: Stoechiometric calculation
  properties: carbon content, fossil 0.602381, dry mass 0.84 kg, heating value, net 36 MJ, wet mass 0.84 kg
  note on carbon content, fossil: An average C content of 0.506 kg C/ m3 has been assumed (this average has been calculated using data in Tab 3.5, ecoinvent v2.2 report 6_V
  note on heating value, net: Literature value, Source: Christoph Meili;Niels Jungbluth;Maresa Bussa (2021) Life cycle inventories of crude oil and natural gas extraction. ESU-services Ltd. commissioned by BAFU & VSG, Schaffhausen, Switzerland, http://esu-services.ch/data/public-lci-reports/
- nitric acid, without water, in 50% solution state: 0.17861 kg; source Unger T A 1996; lognormal variance with pedigree 0.044, pedigree (4,5,4,1,1)
  EcoSpold01Location=RER
  Stoichiometric calculation, assuming an efficiency of 95% per reaction step.
  Further references:
  Kim et al. 2003. Kim S., Overcash M.: Energy in chemical manufacturing processes: gate-to-gate information for life cycle assessment. In: Journal of Chemical Technology & Biotechnology vol. 78, no. 9: 995-1005(11). 2003
  Uncertainty: Stoechiometric calculation
  properties: dry mass 1 kg, wet mass 1 kg
- nitrogen, liquid: 0.06416 kg; source Unger T A 1996; lognormal variance with pedigree 0.044, pedigree (4,5,4,1,1)
  Stoichiometric calculation, assuming an efficiency of 95% per reaction step.
  Further references:
  Güthner et al. 2006. Thomas Güthner and Bernd Mertschenk: Cyanamides. In: Ullmann's Encyclopedia of Industrial Chemistry, Seventh Edition, 2009 Electronic Release (ed. Fiedler E., Grossmann G., Kersebohm D., Weiss G. and Witte C.). 7 th Electronic Release Edition. Wiley InterScience, New York, Article Online Posting Date: July 15, 2006. Online-Version under: DOI: 10.1002/14356007.a08_139.pub2
  Güthner et al. 2006. Thomas Güthner, Bernd Mertschenk, Bernd Schulz: Guanidine and Derivatives. In: Ullmann's Encyclopedia of Industrial Chemistry, Seventh Edition, 2009 Electronic Release (ed. Fiedler E., Grossmann G., Kersebohm D., Weiss G. and Witte C.). 7 th Electronic Release Edition. Wiley InterScience, New York, Article Online Posting Date: July 15, 2006. Online-Version under: DOI: 10.1002/14356007.a12_545.pub2
  EcoSpold01Location=RER
  Uncertainty: Stoechiometric calculation
  properties: dry mass 1 kg, wet mass 1 kg
- o-dichlorobenzene: 0.11383 kg; source Unger T A 1996; lognormal variance with pedigree 0.044, pedigree (4,5,4,1,1)
  (same comment as for 1-propanol)
  properties: carbon content, fossil 0.493151, dry mass 1 kg, heating value, net 18.15 MJ, wet mass 1 kg
- oxygen, liquid: 0.056992 kg; source Unger T A 1996; lognormal variance with pedigree 0.044, pedigree (4,5,4,1,1)
  Stoichiometric calculation, assuming an efficiency of 100% per reaction step.
  Further references:
  Arntz et al. 2007 Dietrich Arntz, Achim Fischer, Mathias Höpp, Sylvia Jacobi, Jörg Sauer, Takashi Ohara, Takahisa Sato, Noboru Shimizu, Helmut Schwind: Acrolein and Methacrolein. In: Ullmann's Encyclopedia of Industrial Chemistry, Seventh Edition, 2009 Electronic Release (ed. Fiedler E., Grossmann G., Kersebohm D., Weiss G. and Witte C.). 7 th Electronic Release Edition. Wiley InterScience, New York, Article Online Posting Date: April 15, 2007. Online-Version under: DOI: 10.1002/14356007.a01_149.pub2
  Eller et al. 2000. Karsten Eller, Erhard Henkes, Roland Rossbacher, Hartmut Höke: Amines, Aliphatic. In: Ullmann's Encyclopedia of Industrial Chemistry, Seventh Edition, 2009 Electronic Release (ed. Fiedler E., Grossmann G., Kersebohm D., Weiss G. and Witte C.). 7 th Electronic Release Edition. Wiley InterScience, New York, Article Online Posting Date: June 15, 2000. Online-Version under: DOI: 10.1002/14356007.a02_001
  Kim et al. 2003. Kim S., Overcash M.: Energy in chemical manufacturing processes: gate-to-gate information for life cycle assessment. In: Journal of Chemical Technology & Biotechnology vol. 78, no. 9: 995-1005(11). 2003
  Laue et al. 2000. Wolfgang Laue, Michael Thiemann, Erich Scheibler, Karl Wilhelm Wiegand: Nitrates and Nitrites. In: Ullmann's Encyclopedia of Industrial Chemistry, Seventh Edition, 2009 Electronic Release (ed. Fiedler E., Grossmann G., Kersebohm D., Weiss G. and Witte C.). 7 th Electronic Release Edition. Wiley InterScience, New York, Article Online Posting Date: June 15, 2000. Online-Version under: DOI: 10.1002/14356007.a17_265
  rntz et al. 2007 Dietrich Arntz, Achim Fischer, Mathias Höpp, Sylvia Jacobi, Jörg Sauer, Takashi Ohara, Takahisa Sato, Noboru
  Shimizu, Helmut Schwind: Acrolein and Methacrolein. In: Ullmann's Encyclopedia of Industrial Chemistry, Seventh Edition, 2009 Electronic Release (ed. Fiedler E., Grossmann G., Kersebohm D., Weiss G. and Witte C.). 7 th Electronic Release Edition. Wiley InterScience, New York, Article Online Posting Date: April 15, 2007. Online-Version under: DOI: 10.1002/14356007.a01_149.pub2
  Thiemann et al. 2000. Michael Thiemann, Erich Scheibler, Karl Wilhelm Wiegand: Nitric Acid, Nitrous Acid, and Nitrogen Oxides. In: Ullmann's Encyclopedia of Industrial Chemistry, Seventh Edition, 2009 Electronic Release (ed. Fiedler E., Grossmann G., Kersebohm D., Weiss G. and Witte C.). 7 th Electronic Release Edition. Wiley InterScience, New York, Article Online Posting Date: June 15, 2000. Online-Version under: DOI: 10.1002/14356007.a17_293
  EcoSpold01Location=RER
  Uncertainty: Stoechiometric calculation
  properties: dry mass 1 kg, wet mass 1 kg
- p-dichlorobenzene: 0.044378 kg; source Unger T A 1996; lognormal variance with pedigree 0.044, pedigree (4,5,4,1,1)
  (same comment as for 1-propanol)
  properties: carbon content, fossil 0.493151, dry mass 1 kg, heating value, net 18.15 MJ, wet mass 1 kg
- phosgene, liquid: 0.37476 kg; source Unger T A 1996; lognormal variance with pedigree 0.044, pedigree (4,5,4,1,1)
  EcoSpold01Location=RER
  Stoichiometric calculation, assuming an efficiency of 95% per reaction step.
  Assumed to be removed with an efficiency of 100% in the wastewater treatment.
  Further references:
  Kim et al. 2003. Kim S., Overcash M.: Energy in chemical manufacturing processes: gate-to-gate information for life cycle assessment. In: Journal of Chemical Technology & Biotechnology vol. 78, no. 9: 995-1005(11). 2003
  Güthner et al. 2006. Thomas Güthner and Bernd Mertschenk: Cyanamides. In: Ullmann's Encyclopedia of Industrial Chemistry, Seventh Edition, 2009 Electronic Release (ed. Fiedler E., Grossmann G., Kersebohm D., Weiss G. and Witte C.). 7 th Electronic Release Edition. Wiley InterScience, New York, Article Online Posting Date: July 15, 2006. Online-Version under: DOI: 10.1002/14356007.a08_139.pub2
  Güthner et al. 2006. Thomas Güthner, Bernd Mertschenk, Bernd Schulz: Guanidine and Derivatives. In: Ullmann's Encyclopedia of Industrial Chemistry, Seventh Edition, 2009 Electronic Release (ed. Fiedler E., Grossmann G., Kersebohm D., Weiss G. and Witte C.). 7 th Electronic Release Edition. Wiley InterScience, New York, Article Online Posting Date: July 15, 2006. Online-Version under: DOI: 10.1002/14356007.a12_545.pub2
  Uncertainty: Stoechiometric calculation
  properties: carbon content, fossil 0.122449, dry mass 1 kg, heating value, net 3.68 MJ, wet mass 1 kg
- propylene: 0.045024 kg; source Unger T A 1996; lognormal variance with pedigree 0.044, pedigree (4,5,4,1,1)
  (same comment as for 1-propanol)
  properties: carbon content, fossil 0.857143, dry mass 1 kg, heating value, net 43.22 MJ, wet mass 1 kg
- sodium chloride, powder: 0.00024581 kg; source Klemm A. 2009; lognormal variance with pedigree 0.044, pedigree (4,5,4,1,1)
  (same comment as for 1-propanol)
  properties: dry mass 1 kg, wet mass 1 kg
- sodium hydroxide, without water, in 50% solution state: 1.0819 kg; source Unger T A 1996; lognormal variance with pedigree 0.044, pedigree (4,5,4,1,1)
  EcoSpold01Location=RER
  Stoichiometric calculation, assuming an efficiency of 100%.
  Further references:
  Eller et al. 2000. Karsten Eller, Erhard Henkes, Roland Rossbacher, Hartmut Höke: Amines, Aliphatic. In: Ullmann's Encyclopedia of Industrial Chemistry, Seventh Edition, 2009 Electronic Release (ed. Fiedler E., Grossmann G., Kersebohm D., Weiss G. and Witte C.). 7 th Electronic Release Edition. Wiley InterScience, New York, Article Online Posting Date: June 15, 2000. Online-Version under: DOI: 10.1002/14356007.a02_001
  Kim et al. 2003. Kim S., Overcash M.: Energy in chemical manufacturing processes: gate-to-gate information for life cycle assessment. In: Journal of Chemical Technology & Biotechnology vol. 78, no. 9: 995-1005(11). 2003
  Lange et al. 2000. Ludwig Lange and Wolfgang Triebel: Sulfides, Polysulfides, and Sulfanes. In: Ullmann's Encyclopedia of Industrial Chemistry, Seventh Edition, 2009 Electronic Release (ed. Fiedler E., Grossmann G., Kersebohm D., Weiss G. and Witte C.). 7 th Electronic Release Edition. Wiley InterScience, New York, Article Online Posting Date: June 15, 2000. Online-Version under: DOI: 10.1002/14356007.a25_443
  Laue et al. 2000. Wolfgang Laue, Michael Thiemann, Erich Scheibler, Karl Wilhelm Wiegand: Nitrates and Nitrites. In: Ullmann's Encyclopedia of Industrial Chemistry, Seventh Edition, 2009 Electronic Release (ed. Fiedler E., Grossmann G., Kersebohm D., Weiss G. and Witte C.). 7 th Electronic Release Edition. Wiley InterScience, New York, Article Online Posting Date: June 15, 2000. Online-Version under: DOI: 10.1002/14356007.a17_265
  Strittmatter et al. 2007. Harald Strittmatter, Stefan Hildbrand, Peter Pollak: Malonic Acid and Derivatives. In: Ullmann's Encyclopedia of Industrial Chemistry, Seventh Edition, 2009 Electronic Release (ed. Fiedler E., Grossmann G., Kersebohm D., Weiss G. and Witte C.). 7 th Electronic Release Edition. Wiley InterScience, New York, Article Online Posting Date: April 15, 2007. Online-Version under: DOI: 10.1002/1435 6007.a16_063.pub2
  Thiemann et al. 2000. Michael Thiemann, Erich Scheibler, Karl Wilhelm Wiegand: Nitric Acid, Nitrous Acid, and Nitrogen Oxides. In: Ullmann's Encyclopedia of Industrial Chemistry, Seventh Edition, 2009 Electronic Release (ed. Fiedler E., Grossmann G., Kersebohm D., Weiss G. and Witte C.). 7 th Electronic Release Edition. Wiley InterScience, New York, Article Online Posting Date: June 15, 2000. Online-Version under: DOI: 10.1002/14356007.a17_293
  Uncertainty: Stoechiometric calculation
  properties: dry mass 1 kg, heating value, net 3.03 MJ, wet mass 1 kg
- sulfur: 0.0070046 kg; source Kim S. 2003; lognormal variance with pedigree 0.044, pedigree (4,5,4,1,1)
  (same comment as for acrylonitrile)
  properties: dry mass 1 kg, wet mass 1 kg
- sulfur dioxide, liquid: 0.039389 kg; source Unger T A 1996; lognormal variance with pedigree 0.044, pedigree (4,5,4,1,1)
  (same comment as for hydrogen, liquid)
  properties: dry mass 1 kg, wet mass 1 kg
- sulfur trioxide: 0.12191 kg; source Unger T A 1996; lognormal variance with pedigree 0.044, pedigree (4,5,4,1,1)
  EcoSpold01Location=RER
  Stoichiometric calculation, assuming an efficiency of 95% per reaction step.
  Further references:
  Güthner et al. 2006. Thomas Güthner and Bernd Mertschenk: Cyanamides. In: Ullmann's Encyclopedia of Industrial Chemistry, Seventh Edition, 2009 Electronic Release (ed. Fiedler E., Grossmann G., Kersebohm D., Weiss G. and Witte C.). 7 th Electronic Release Edition. Wiley InterScience, New York, Article Online Posting Date: July 15, 2006. Online-Version under: DOI: 10.1002/14356007.a08_139.pub2
  Uncertainty: Stoechiometric calculation
  properties: dry mass 1 kg, wet mass 1 kg
- sulfuric acid: 0.077328 kg; source Eller K. 2009; lognormal variance with pedigree 0.044, pedigree (4,5,4,1,1)
  (same comment as for 1-propanol)
  properties: dry mass 1 kg, wet mass 1 kg
- toluene, liquid: 0.13576 kg; source Unger T A 1996; lognormal variance with pedigree 0.044, pedigree (4,5,4,1,1)
  (same comment as for nitric acid, without water, in 50% solution state)
  properties: carbon content, fossil 0.913043, dry mass 1 kg, heating value, net 38.17 MJ, wet mass 1 kg
- water, decarbonised: 0.00941568, 2.96568e-5, 0.0467059, 0.0309606, 0.00170921 kg (5 suppliers, which the file names only by identifier); sum of these 0.088821 kg; source Unger T A 1996; lognormal variance with pedigree 0.044, pedigree (4,5,4,1,1)
  Stoichiometric calculation, assuming an efficiency of 100%.
  Further references:
  Arntz et al. 2007. Dietrich Arntz, Achim Fischer, Mathias Höpp, Sylvia Jacobi, Jörg Sauer, Takashi Ohara, Takahisa Sato, Noboru Shimizu, Helmut Schwind: Acrolein and Methacrolein. In: Ullmann's Encyclopedia of Industrial Chemistry, Seventh Edition, 2009 Electronic Release (ed. Fiedler E., Grossmann G., Kersebohm D., Weiss G. and Witte C.). 7 th Electronic Release Edition. Wiley InterScience, New York, Article Online Posting Date: April 15, 2007. Online-Version under: DOI: 10.1002/14356007.a01_149.pub2
  Eller et al. 2000. Karsten Eller, Erhard Henkes, Roland Rossbacher, Hartmut Höke: Amines, Aliphatic. In: Ullmann's Encyclopedia of Industrial Chemistry, Seventh Edition, 2009 Electronic Release (ed. Fiedler E., Grossmann G., Kersebohm D., Weiss G. and Witte C.). 7 th Electronic Release Edition. Wiley InterScience, New York, Article Online Posting Date: June 15, 2000. Online-Version under: DOI: 10.1002/14356007.a02_001
  Güthner et al. 2006. Thomas Güthner and Bernd Mertschenk: Cyanamides. In: Ullmann's Encyclopedia of Industrial Chemistry, Seventh Edition, 2009 Electronic Release (ed. Fiedler E., Grossmann G., Kersebohm D., Weiss G. and Witte C.). 7 th Electronic Release Edition. Wiley InterScience, New York, Article Online Posting Date: July 15, 2006. Online-Version under: DOI: 10.1002/14356007.a08_139.pub2
  Güthner et al. 2006. Thomas Güthner, Bernd Mertschenk, Bernd Schulz: Guanidine and Derivatives. In: Ullmann's Encyclopedia of Industrial Chemistry, Seventh Edition, 2009 Electronic Release (ed. Fiedler E., Grossmann G., Kersebohm D., Weiss G. and Witte C.). 7 th Electronic Release Edition. Wiley InterScience, New York, Article Online Posting Date: July 15, 2006. Online-Version under: DOI: 10.1002/14356007.a12_545.pub2
  Shimizu et al. 2000. Shinkichi Shimizu, Nanao Watanabe, Toshiaki Kataoka, Takayuki Shoji, Nobuyuki Abe, Sinji Morishita, Hisao Ichimura: Pyridine and Pyridine Derivatives. In: Ullmann's Encyclopedia of Industrial Chemistry, Seventh Edition, 2009 Electronic Release (ed. Fiedler E., Grossmann G., Kersebohm D., Weiss G. and Witte C.). 7 th Electronic Release Edition. Wiley InterScience, New York, Article Online Posting Date: June 15, 2000. Online-Version under: DOI: 10.1002/14356007.a22_399
  Stoichiometric calculation, assuming an efficiency of 100%.
  Further references:
  Arntz et al. 2007. Dietrich Arntz, Achim Fischer, Mathias Höpp, Sylvia Jacobi, Jörg Sauer, Takashi Ohara, Takahisa Sato, Noboru Shimizu, Helmut Schwind: Acrolein and Methacrolein. In: Ullmann's Encyclopedia of Industrial Chemistry, Seventh Edition, 2009 Electronic Release (ed. Fiedler E., Grossmann G., Kersebohm D., Weiss G. and Witte C.). 7 th Electronic Release Edition. Wiley InterScience, New York, Article Online Posting Date: April 15, 2007. Online-Version under: DOI: 10.1002/14356007.a01_149.pub2
  Eller et al. 2000. Karsten Eller, Erhard Henkes, Roland Rossbacher, Hartmut Höke: Amines, Aliphatic. In: Ullmann's Encyclopedia of Industrial Chemistry, Seventh Edition, 2009 Electronic Release (ed. Fiedler E., Grossmann G., Kersebohm D., Weiss G. and Witte C.). 7 th Electronic Release Edition. Wiley InterScience, New York, Article Online Posting Date: June 15, 2000. Online-Version under: DOI: 10.1002/14356007.a02_001
  Güthner et al. 2006. Thomas Güthner and Bernd Mertschenk: Cyanamides. In: Ullmann's Encyclopedia of Industrial Chemistry, Seventh Edition, 2009 Electronic Release (ed. Fiedler E., Grossmann G., Kersebohm D., Weiss G. and Witte C.). 7 th Electronic Release Edition. Wiley InterScience, New York, Article Online Posting Date: July 15, 2006. Online-Version under: DOI: 10.1002/14356007.a08_139.pub2
  Güthner et al. 2006. Thomas Güthner, Bernd Mertschenk, Bernd Schulz: Guanidine and Derivatives. In: Ullmann's Encyclopedia of Industrial Chemistry, Seventh Edition, 2009 Electronic Release (ed. Fiedler E., Grossmann G., Kersebohm D., Weiss G. and Witte C.). 7 th
  EcoSpold01Location=RER
  Uncertainty: Stoechiometric calculation
  properties: wet mass 1 kg

## Inputs from nature
- Water, cooling, unspecified natural origin [natural resource, in water]: 0.15569 m3; name water_cooling_UNO_input; source Gendorf 2000; lognormal variance with pedigree 0.044, pedigree (4,5,4,1,1)
  Estimation (24 kg cooling water per kg produced chemical per step).
  Uncertainty: Estimation

## Emissions to nature
- 1,2-Dichlorobenzene [air, urban air close to ground]: 0.00022766 kg; lognormal variance with pedigree 0.188, pedigree (4,5,5,5,5)
  Estimation, based on the assumption that 0.2% of volatile input materials is emitted to air occurring from the purge vent, the destillation vent and fugitive emission sources.
  Uncertainty: Estimation
- Acetic acid [air, urban air close to ground]: 0.00023979 kg; lognormal variance with pedigree 0.188, pedigree (4,5,5,5,5)
  (same comment as for 1,2-Dichlorobenzene)
- Ammonia [air, urban air close to ground]: 0.00011145 kg; lognormal variance with pedigree 0.218, pedigree (4,5,5,5,5)
  (same comment as for 1,2-Dichlorobenzene)
- Carbon dioxide, fossil [air, urban air close to ground]: 0.56976 kg; lognormal variance with pedigree 0.1786, pedigree (4,5,5,5,5)
  Estimation, based on the assumption that 0.2% of volatile input materials is emitted to air occurring from the purge vent, the destillation vent and fugitive emission sources. Remaining gases like CH4 or CO are oxidated to CO2. The carbon contained in the removed carbon compounds from wastewater treatment was accounted as CO2 emissions to air (assuming a removal efficiency of 90%).
  Uncertainty: Estimation
- Chlorine [air, urban air close to ground]: 0.0010961 kg; lognormal variance with pedigree 0.188, pedigree (4,5,5,5,5)
  (same comment as for 1,2-Dichlorobenzene)
- Chloroacetic acid [air, urban air close to ground]: 0.00027066 kg; lognormal variance with pedigree 0.188, pedigree (4,5,5,5,5)
  (same comment as for 1,2-Dichlorobenzene)
- Chlorosulfonic acid [air, urban air close to ground]: 9.6489e-5 kg; lognormal variance with pedigree 0.188, pedigree (4,5,5,5,5)
  (same comment as for 1,2-Dichlorobenzene)
- Cyanoacetic acid [air, urban air close to ground]: 7.9021e-5 kg; lognormal variance with pedigree 0.188, pedigree (4,5,5,5,5)
  (same comment as for 1,2-Dichlorobenzene)
- Dimethyl malonate [air, urban air close to ground]: 9.9092e-5 kg; lognormal variance with pedigree 0.188, pedigree (4,5,5,5,5)
  (same comment as for 1,2-Dichlorobenzene)
- Ethanol [air, urban air close to ground]: 4.2695e-5 kg; lognormal variance with pedigree 0.188, pedigree (4,5,5,5,5)
  (same comment as for 1,2-Dichlorobenzene)
- Hydrochloric acid [air, urban air close to ground]: 6.4273e-5 kg; lognormal variance with pedigree 0.188, pedigree (4,5,5,5,5)
  (same comment as for 1,2-Dichlorobenzene)
- Hydrogen [air, urban air close to ground]: 2.8892e-5 kg; lognormal variance with pedigree 0.188, pedigree (4,5,5,5,5)
  (same comment as for 1,2-Dichlorobenzene)
- Hydrogen sulfide [air, urban air close to ground]: 2.9687e-5 kg; lognormal variance with pedigree 0.188, pedigree (4,5,5,5,5)
  (same comment as for 1,2-Dichlorobenzene)
- Methane, dichloro-, HCC-30 [air, urban air close to ground]: 0.00012131 kg; lognormal variance with pedigree 0.188, pedigree (4,5,5,5,5)
  (same comment as for 1,2-Dichlorobenzene)
- Methane, fossil [air, urban air close to ground]: 0.00062796 kg; lognormal variance with pedigree 0.188, pedigree (4,5,5,5,5)
  (same comment as for 1,2-Dichlorobenzene)
- Methanesulfonic acid [air, urban air close to ground]: 7.9853e-5 kg; lognormal variance with pedigree 0.188, pedigree (4,5,5,5,5)
  (same comment as for 1,2-Dichlorobenzene)
- Methanol [air, urban air close to ground]: 0.00021241 kg; lognormal variance with pedigree 0.188, pedigree (4,5,5,5,5)
  (same comment as for 1,2-Dichlorobenzene)
- Methylamine [air, urban air close to ground]: 2.4496e-5 kg; lognormal variance with pedigree 0.188, pedigree (4,5,5,5,5)
  (same comment as for 1,2-Dichlorobenzene)
- Nitrogen oxides [air, urban air close to ground]: 4.727e-5 kg; lognormal variance with pedigree 0.188, pedigree (4,5,5,5,5)
  (same comment as for 1,2-Dichlorobenzene)
- Propanol [air, urban air close to ground]: 4.0011e-5 kg; lognormal variance with pedigree 0.188, pedigree (4,5,5,5,5)
  (same comment as for 1,2-Dichlorobenzene)
- Propene [air, urban air close to ground]: 9.0048e-5 kg; lognormal variance with pedigree 0.188, pedigree (4,5,5,5,5)
  (same comment as for 1,2-Dichlorobenzene)
- Sulfur dioxide [air, urban air close to ground]: 0.026149 kg; lognormal variance with pedigree 0.1786, pedigree (4,5,5,5,5)
  (same comment as for 1,2-Dichlorobenzene)
- Sulfur trioxide [air, urban air close to ground]: 0.00021288 kg; lognormal variance with pedigree 0.188, pedigree (4,5,5,5,5)
  (same comment as for 1,2-Dichlorobenzene)
- Toluene [air, urban air close to ground]: 0.00027153 kg; lognormal variance with pedigree 0.188, pedigree (4,5,5,5,5)
  (same comment as for 1,2-Dichlorobenzene)
- Water [air, unspecified]: 0.0603643 m3; name water_to_air_unspecified; = (water_decarbonised_input/1000*fraction_WDC_to_air)+(water_cooling_UNO_input*fraction_CW_to_air); lognormal variance with pedigree 0.0487, pedigree (2,2,4,1,1)
  Calculated value based on literature values and expert opinion. See comments in the parametres' comment field.
  property fraction, origin: fresh water 0.000570174; name fraction_origin_fresh_water
  property fraction, origin: salt water 0; name fraction_origin_salt_water
  property fraction, origin: unspecified 0.99943; name fraction_origin_unspecified
- t-Butylamine [air, urban air close to ground]: 5.4649e-5 kg; lognormal variance with pedigree 0.188, pedigree (4,5,5,5,5)
  (same comment as for 1,2-Dichlorobenzene)
- 1,2-Dichlorobenzene [water, surface water]: 0.00054638 kg; lognormal variance with pedigree 0.448, pedigree (4,5,5,5,5)
  Estimation, assuming that the remaining amount of unreacted input materials leave the production process with the wastewater, wich is further treated in an internal wastewater plant.
  Uncertainty: Estimation
- Acetic acid [water, surface water]: 0.001194 kg; lognormal variance with pedigree 0.448, pedigree (4,5,5,5,5)
  (same comment as for 1,2-Dichlorobenzene)
- Acetonitrile [water, surface water]: 6.6169e-5 kg; lognormal variance with pedigree 0.448, pedigree (4,5,5,5,5)
  Estimation, assuming that the remaining amount of unreacted input materials leave the production process with the wastewater, wich is further treated in an internal wastewater plant. For the nitrogen containing compounds within the wastewater a removal efficiency of 50% was assumed. The nitrogen emitted to air (N2) is neglected.
  Uncertainty: Estimation
- Ammonium [water, surface water]: 0.010687 kg; lognormal variance with pedigree 0.188, pedigree (4,5,5,5,5)
  (same comment as for Acetonitrile)
- Calcium II [water, surface water]: 0.085507 kg; lognormal variance with pedigree 0.448, pedigree (4,5,5,5,5)
  (same comment as for 1,2-Dichlorobenzene)
- Carbonate [water, surface water]: 0.12826 kg; lognormal variance with pedigree 0.448, pedigree (4,5,5,5,5)
  (same comment as for 1,2-Dichlorobenzene)
- Chloride [water, surface water]: 0.91455 kg; lognormal variance with pedigree 0.448, pedigree (4,5,5,5,5)
  (same comment as for 1,2-Dichlorobenzene)
- Chloroacetic acid [water, surface water]: 0.00042882 kg; lognormal variance with pedigree 0.448, pedigree (4,5,5,5,5)
  (same comment as for 1,2-Dichlorobenzene)
- Chlorosulfonic acid [water, surface water]: 0.00024062 kg; lognormal variance with pedigree 0.448, pedigree (4,5,5,5,5)
  (same comment as for 1,2-Dichlorobenzene)
- Dimethylamine [water, surface water]: 0.00048049 kg; lognormal variance with pedigree 0.448, pedigree (4,5,5,5,5)
  (same comment as for Acetonitrile)
- Ethanol [water, surface water]: 0.016157 kg; lognormal variance with pedigree 0.448, pedigree (4,5,5,5,5)
  (same comment as for 1,2-Dichlorobenzene)
- Fluoride [water, surface water]: 0.0095927 kg; lognormal variance with pedigree 0.188, pedigree (4,5,5,5,5)
  (same comment as for 1,2-Dichlorobenzene)
- Formate [water, surface water]: 0.016844 kg; lognormal variance with pedigree 0.448, pedigree (4,5,5,5,5)
  (same comment as for 1,2-Dichlorobenzene)
- Methane, dichloro-, HCC-30 [water, surface water]: 0.00029115 kg; lognormal variance with pedigree 0.448, pedigree (4,5,5,5,5)
  (same comment as for 1,2-Dichlorobenzene)
- Methanol [water, surface water]: 0.00062477 kg; lognormal variance with pedigree 0.448, pedigree (4,5,5,5,5)
  (same comment as for 1,2-Dichlorobenzene)
- Methylamine [water, surface water]: 5.8792e-5 kg; lognormal variance with pedigree 0.448, pedigree (4,5,5,5,5)
  (same comment as for Acetonitrile)
- Nitrate [water, surface water]: 0.0084027 kg; lognormal variance with pedigree 0.188, pedigree (4,5,5,5,5)
  (same comment as for Acetonitrile)
- Propanol [water, surface water]: 9.6026e-5 kg; lognormal variance with pedigree 0.448, pedigree (4,5,5,5,5)
  (same comment as for 1,2-Dichlorobenzene)
- Propene [water, surface water]: 0.00021612 kg; lognormal variance with pedigree 0.448, pedigree (4,5,5,5,5)
  (same comment as for 1,2-Dichlorobenzene)
- Sodium I [water, surface water]: 0.56542 kg; lognormal variance with pedigree 0.798, pedigree (4,5,5,5,5)
  (same comment as for 1,2-Dichlorobenzene)
- Sulfate [water, surface water]: 0.088695 kg; lognormal variance with pedigree 0.188, pedigree (4,5,5,5,5)
  (same comment as for 1,2-Dichlorobenzene)
- Sulfur [water, surface water]: 0.00035023 kg; lognormal variance with pedigree 0.188, pedigree (4,5,5,5,5)
  (same comment as for 1,2-Dichlorobenzene)
- Toluene [water, surface water]: 0.00046735 kg; lognormal variance with pedigree 0.448, pedigree (4,5,5,5,5)
  (same comment as for 1,2-Dichlorobenzene)
- Water [water, unspecified]: 0.0954145 m3; name water_to_water_unspecified; = (water_decarbonised_input/1000)*(1-fraction_WDC_to_air)+water_cooling_UNO_input*(1-fraction_CW_to_air); lognormal variance with pedigree 0.0487, pedigree (2,2,4,1,1)
  (same comment as for Water)
  property carbon content, fossil 0; name C_content_fossil
  property carbon content, non-fossil 0; name C_content_non_fossil
  property fraction, origin: fresh water 0.000570174; name fraction_origin_fresh_water_Ww
  property fraction, origin: salt water 0; name fraction_origin_salt_water_Ww
  property fraction, origin: unspecified 0.99943; name fraction_origin_unspecified_Ww
  property water in wet mass 1000 kg; name WWM
- t-Butylamine [water, surface water]: 0.00013116 kg; lognormal variance with pedigree 0.448, pedigree (4,5,5,5,5)
  (same comment as for Acetonitrile)

## Sampling procedure
Literature data

## Review by Thomas Nemecek 2010-03-27
Passed.
none

## Review by Roland Hischier 2011-11-14
Transfer of documentation done.
