# photovoltaic slanted-roof installation, 3kWp, single-Si, laminated, integrated, on roof

Dataset: EcoSpold 2, unit process
Geography: CH
Time period: 2000-01-01 to 2022-12-31
Technology level: current
Classification: EcoSpold01Categories: photovoltaic/production of components
Classification: ISIC rev.4 ecoinvent: 3320:Installation of industrial machinery and equipment
Synonyms: silicon; single crystalline; monocrystalline
Tags: ConvertedDataset
Scenario: Business-as-Usual
System model: Allocation at the point of substitution
Share of production covered: 50 %
Generated by: Niels Jungbluth
Published in: Jungbluth, N. 2007
Database: ecoinvent
isCopyrightProtected: true

## General comment
Photovoltaic installation with a capacity of 3kWp and a life time of 30 years installed in CH.
[This dataset was already contained in the ecoinvent database version 2. It was not individually updated during the transfer to ecoinvent version 3. Life Cycle Impact Assessment results may still have changed, as they are affected by changes in the supply chain, i.e. in other datasets. This dataset was generated following the ecoinvent quality guidelines for version 2. It may have been subject to central changes described in the ecoinvent version 3 change report (http://www.ecoinvent.org/database/ecoinvent-version-3/reports-of-changes/), and the results of the central updates were reviewed extensively. The changes added e.g. consistent water flows and other information throughout the database. The documentation of this dataset can be found in the ecoinvent reports of version 2, which are still available via the ecoinvent website. The change report linked above covers all central changes that were made during the conversion process.]

## Included activities end
All components for the installation of a 3kWp photovoltaic plant, energy use for the mounting, transport of materials and persons to the construction place. Disposal of components after end of life.

## Geography
Installation in CH

## Technology
Current technology for mounting of panels or laminates, electric installations and other components.

## Time period
Calculation of amount of panels used based on efficiency data for 2005. Other data are adopted.

## Reference product
- photovoltaic slanted-roof installation, 3kWp, single-Si, laminated, integrated, on roof: 1 unit; By-product classification allocatable product; CPC 87360: Installation services of electrical machinery and apparatus n.e.c.
  EcoSpold01Location=CH
  production volume 80.4333 unit
    Total installed capacity in 2000: 12.7MWp in CH. GLO installed PV-power 711MWp
    Total installed capacity in 2000: 12.7MWp in CH. GLO installed PV-power 711MWp (Tab 11.3, ecoinvent v2 report 6_XII). Tab 12.8 gives the shares of the different types of cells and mounting systems for CH and RER. The last one was used to calculate GLO production volumes
  property price 13570.9 EUR2005
    Calculated based on inputs: The price of the product has been calculated as a sum of the values of the material and energy inputs for this product. This value is therefore a rough estimation. It may underestimate the real price since there are additional expenses when producing any product. These expences can include for example labour costs, treatment of waste materials and profit for the producer. Please consider carefully whether this level of data quality is acceptable for your application.
  properties: carbon allocation 0 kg, carbon content 0

## Inputs from technosphere
- electricity, low voltage: 0.23 kWh; lognormal variance with pedigree 0.054, pedigree (3,4,5,1,1)
  EcoSpold01Location=CH
  Energy use for erection of 3kWp plant
  Uncertainty: Energy use for erection of 3kWp plant
- inverter, 2.5kW: 2.4 unit; lognormal variance with pedigree 0.0526, pedigree (2,4,5,1,1)
  Literature, 1 repair in the life time
  EcoSpold01Location=RER
  Uncertainty: Literature, 1 repair in the life time
- photovoltaic laminate, single-Si wafer: 22.071 m2; lognormal variance with pedigree 0.064, pedigree (3,4,5,1,1)
  EcoSpold01Location=RER
  Calculation, 2% of modules repaired in the life time, 1% rejects
  Uncertainty: Calculation, 2% of modules repaired in the life time, 1% rejects
- photovoltaic module, building-integrated, for slanted-roof installation: 21.429 m2; lognormal variance with pedigree 0.052, pedigree (3,1,5,1,1)
  EcoSpold01Location=RER
  Calculation with m2 panel
  Uncertainty: calculation with m2 panel
- photovoltaics, electric installation for 3kWp module, at building: 1 unit; lognormal variance with pedigree 0.174, pedigree (3,4,5,1,1)
  EcoSpold01Location=CH
  Literature
  Uncertainty: Literature

## Sampling procedure
Publication for efficiency, mounting systems and own estimations for other components.

## Extrapolations
Rough assumption for the decrease in material weights for mounting structures.

## Review by Roberto Dones 2007-08-23
Passed.
none
