# treatment of sewage sludge, 97% water, WWT, condensate from light oil boiler, landfarming

Dataset: EcoSpold 2, unit process
Geography: RoW
Time period: 2000-01-01 to 2022-12-31
Technology level: current
Classification: ISIC rev.4 ecoinvent: 3821:Treatment and disposal of non-hazardous waste
Scenario: Business-as-Usual
System model: Allocation at the point of substitution
Generated by: Nikolia Stoikou
Database: ecoinvent
isCopyrightProtected: true

## General comment
The process represents the treatment of a waste (sewage sludge) that is exclusively produced from another waste treatment. Recommended use of this dataset: to be used within the specific chain of treatments for 'condensate from light oil boiler'. Share of biogenic carbon in the sludge: 0%.

## Included activities start
The activity starts with the waste being available for landfarming. Collection and transportation of the waste to this process is not included.

## Included activities end
The activity ends with the waste being treated and waste-specific emissions from the landfarming process are released to the environment (air, water and soil). The activity is considering local fate of emissions and the initial specific wastewater composition (generating the sewage sludge). Further, it includes provision of fertiliser functions for N, P, K, if present in the sludge.

## Geography
The site has mean annual temperature (MAT) of 16.743579766537 degC, mean annual precipitation (MAP) of 1250.84108527132 mm/year, mean annual actual evaporation (EAT) of 460.58904958214 mm/year. Climate will influence the local fate emissions based on the elemental composition of the sludge as well as water evaporation to air (= consumptive water use).
References: UN data, 2020. Precipitation, Environment Statistics Database, United Nations Statistics Division Available at: http://data.un.org/Data.aspx?q=precipitation&d=ENV&f=variableID%3a6;
World Bank, 2022. Surface area (sq.km), World Bank Group Available at: https://data.worldbank.org/indicator/AG.SRF.TOTL.K2;
Doka G.,2021. A model for composition-specific life cycle inventories of regionalised wastewater fates, Zurich, Switzerland. http://www.doka.ch/publications.htm

## Technology
Landfarming is the process of spreading a substrate on agricultural soil. Sewage sludge is generated in the wastewater treatment of condensate from light oil boiler. Spreading of liquid sewage sludge (97w% water content) on agricultural fields with mobile vacuum tanker.

## Reference product
- organic nitrogen fertiliser, as N: 1 kg; By-product classification allocatable product; CPC 34659: Fertilizers n.e.c.; lognormal variance with pedigree 0.12451, pedigree (1,1,1,1,1)
  gross fertilizer function provided from sewage sludge spreading on agricultural fields.
  Uncertainty: Uncertainty calculated from upstream wastewater technosphere fate uncertainty, wastewater composition uncertainty, and treatment model uncertainty
  production volume 13827 kg
    Calculated in proportion to wastewater reference product.
  property nitrogen content 1
    Nitrogen content (on a dry matter basis) of organic nitrogen fertiliser, as N is calculated from the molecular formula of the substance (Nitrogen).
  property price 0.473 EUR2005
    Set equal to the price of the corresponding inorganic fertiliser
  properties: carbon allocation 0 kg, carbon content 0, carbon content, fossil 0, carbon content, non-fossil 0, dry mass 1 kg, water content 0, water in wet mass 0 kg, wet mass 1 kg

## Inputs from technosphere
- chimney: 3.61522e-5 m
- condensate from light oil boiler: -0.000438908 m3
- electricity, low voltage: 0.0039526, 0.00783313, 0.0752455, 0.00134227, 0.0268925, 0.000244097, 0.00196738 kWh (7 suppliers, which the file names only by identifier); sum of these 0.117478 kWh
- hazardous waste, for incineration: -0.000182075, -3.10111e-6 kg (2 suppliers, which the file names only by identifier); sum of these -0.000185176 kg
- light fuel oil: 0.876975, 0.0175007, 0.0870467, 0.00836967, 0.00622005, 0.00577631, 0.04313 kg (7 suppliers, which the file names only by identifier); sum of these 1.04502 kg
- oil boiler, 100kW: 1.47556e-6 unit
- oil boiler, 10kW: 1.47556e-5 unit
- oil storage, 3000l: 1.3772e-5 unit

## Emissions to nature
- Acetaldehyde [air, urban air close to ground]: 9.14726e-7 kg
- Acetone [air, urban air close to ground]: 2.23104e-6 kg
- Acrolein [air, urban air close to ground]: 5.13139e-7 kg
- Benzaldehyde [air, urban air close to ground]: 2.67725e-7 kg
- Benzene [air, urban air close to ground]: 8.92415e-7 kg
- Butane [air, urban air close to ground]: 6.69312e-6 kg
- Carbon dioxide, fossil [air, urban air close to ground]: 3.30194 kg
- Carbon monoxide, fossil [air, urban air close to ground]: 0.000368121 kg
- Copper ion [air, urban air close to ground]: 1.78483e-8 kg
- Dinitrogen monoxide [air, urban air close to ground]: 3.12345e-5 kg
- Dioxins, measured as 2,3,7,8-tetrachlorodibenzo-p-dioxin [air, urban air close to ground]: 2.54338e-15 kg
- Ethane [air, urban air close to ground]: 8.92415e-7 kg
- Ethylene [air, urban air close to ground]: 2.23104e-6 kg
- Ethyne [air, urban air close to ground]: 4.46208e-7 kg
- Formaldehyde [air, urban air close to ground]: 2.67725e-7 kg
- Hydrocarbons, aliphatic, alkanes, unspecified [air, urban air close to ground]: 1.11552e-5 kg
- Hydrocarbons, aliphatic, unsaturated [air, urban air close to ground]: 8.92415e-7 kg
- Hydrocarbons, aromatic [air, urban air close to ground]: 8.92415e-7 kg
- Hydrogen fluoride [air, urban air close to ground]: 2.00793e-7 kg
- Mercury II [air, urban air close to ground]: 2.23104e-8 kg
- Methane, fossil [air, urban air close to ground]: 8.92415e-6 kg
- Nitrogen oxides [air, urban air close to ground]: 0.00122707 kg
- PAH, polycyclic aromatic hydrocarbons [air, urban air close to ground]: 2.05256e-8 kg
- Particulate Matter, < 2.5 um [air, urban air close to ground]: 2.23104e-5 kg
- Pentane [air, urban air close to ground]: 4.46208e-6 kg
- Propanal [air, urban air close to ground]: 2.67725e-7 kg
- Propane [air, urban air close to ground]: 1.33862e-6 kg
- Propene [air, urban air close to ground]: 8.92415e-7 kg
- Sulfur dioxide [air, urban air close to ground]: 0.00203779 kg
- Toluene [air, urban air close to ground]: 4.46208e-7 kg
- Zinc II [air, urban air close to ground]: 2.23104e-8 kg
