# evaporation of natural gas, import from AE

Dataset: EcoSpold 2, unit process
Geography: GLO
Time period: 2000-01-01 to 2022-12-31
Technology level: current
Classification: ISIC rev.4 ecoinvent: 3520:Manufacture of gas; distribution of gaseous fuels through mains
Scenario: Business-as-Usual
System model: Allocation at the point of substitution
Share of production covered: 100 %
Generated by: Maresa Bussa
Published in: Bussa, M. 2022
Database: ecoinvent
isCopyrightProtected: true

## General comment
This dataset describes the gasification of liquefied natural gas [m3] from the United Arab Emirates in an evaporation plant in the Global geography.
The reference flow refers to 1 standard cubic meter of natural gas in the gaseous state. The volume of liquified natural gas is around 1/600th of the gaseous volume at standard conditions. Evaporation of natural gas is the process used to transform liquefied natural gas (LNG), delivered by oversea tanker transport, to gaseous natural gas.
According to Bussa et al. (2022), there are various regasification technologies to vaporize LNG, with the most common heat sources being ambient air, sea water, and natural gas. The technology selection depends on the geographical and meteorological conditions of the location. The technology mix in Europe (also assumed for other geographies in the database) is made up of 60% open rack vaporizers (ORV) and 40% submerged combustion vaporizers (Agarwal et al. 2017). After the LNG has been evaporated, it can be feed into the natural gas distribution network.
Reference(s):
M. Bussa, N. Jungbluth, C. Meili (2022) Life cycle inventories for long-distance transport and distribution of natural gas. ESU-services Ltd. Schaffhausen, Switzerland. Available from: http://esu-services.ch/data/public-lci-reports/

## Included activities start
The activity starts with the arrival of the liquefied natural gas (LNG) to the evaporation facility in the receiving region.

## Included activities end
The activity ends with the supply of natural gas, high pressure, ready for further transmission or distribution. The needed input of natural gas, the energy and water consumption, emissions due to gas leakage, as well as the infrastructure is considered.

## Geography
Global

## Technology
Various regasification technologies to evaporate LNG are available; common heat sources are ambient air, sea water and natural gas. The selected technology depends on the geographical and meteorological conditions of the location. Open rack vaporizers (ORV) use seawater to vaporize the LNG. Sodium hypochlorite is added to the seawater inlet stream to avoid algae growth within the heat exchanger tubes. The colder seawater is then, together with the sodium hypochlorite, discharged to the sea. Seawater is only an effective heat source for vaporizing LNG if its temperature is higher 5 °C. In submerged combustion vaporizers (SCV), LNG flows in tubes through a water bath, which is heated by burning natural gas. SCVs are mainly used for peak shaving purposes. The technology mix in Europe (assumed the same for all geographies in the database) is calculated based on the shares of technologies used: 60 % open rack vaporizers (ORV) and 40 % submerged combustion vaporizers (Agarwal et al. 2017). Methane emissions from the evaporation are estimated as 3.5E-04 kg methane/m3 (Schori et al. 2012).

## Time period
Data on energy use for the evaporation of natural gas stem from a review of common technologies from 2017 and 2019.

## Reference product
- natural gas, high pressure: 1 m3; By-product classification allocatable product; CPC 12020: Natural gas, liquefied or in the gaseous state; CAS 14493-06-2
  production volume 7.7e9 m3
    Based on BP's LNG trade statistics for 2019
  property heating value, gross 40 MJ
    At standard conditions; based on Meili et al. (2022) section 5.2
  property heating value, net 36 MJ
    At standard conditions; based on Meili et al. (2022) section 5.2
  property price 0.166 EUR2005
    Temporary price data. Calculated as 90% of purchasers price based on: 2005 price for Europe-27 Import (US$ and kg) in UN Commodity Trade Statistics Database - Natural gas in gaseous state (http://data.un.org/Data.aspx?q=natural+gas&d=ComTrade&f=_l1Code%3a28%3bcmdCode%3a271121; accessed 4 January 2011), using density of natural gas of 0.8 kg/m3 for unit conversion.
  properties: carbon allocation 0.544635 kg, carbon content 0.741, carbon content, fossil 0.741, carbon content, non-fossil 0, dry mass 0.735 kg, water content 0, water in wet mass 0 kg, wet mass 0.735 kg

## Inputs from technosphere
- natural gas processing plant: 7.89e-13 unit; lognormal variance with pedigree 0.464437, pedigree (5,3,3,3,5)
  Estimate for Europe
- natural gas, burned in gas turbine: 0.24768 MJ; lognormal variance with pedigree 0.128695, pedigree (4,1,1,3,5)
  Based on technology average
- natural gas, liquefied: 1 m3; lognormal variance with pedigree 0.120595, pedigree (1,1,1,1,5)
  input of natural gas
  properties: carbon content, fossil 0.741, dry mass 0.735 kg, heating value, gross 40 MJ, heating value, net 36 MJ, wet mass 0.735 kg
  note on carbon content, fossil: Set equal to that of "natural gas, high pressure" (based on composition in Bussa et al. (2021), tab. 3.1).
  note on heating value, gross: Set equal to that of "natural gas, high pressure" (at standard conditions; based on Meili et al. 2022, section 5.2)
- sodium hypochlorite, without water, in 15% solution state: 0.0058464, 0.0277536 kg (2 suppliers, which the file names only by identifier); sum of these 0.0336 kg; lognormal variance with pedigree 0.138695, pedigree (4,5,3,3,5)
  Environmental report of Greek site
  properties: dry mass 1 kg, wet mass 1 kg

## Inputs from nature
- Water, salt, ocean [natural resource, in water]: 6.42 m3; lognormal variance with pedigree 0.138695, pedigree (4,5,3,3,5)
  Environmental report of Greek site

## Emissions to nature
- Methane, fossil [air, non-urban air or from high stacks]: 0.00035 kg; lognormal variance with pedigree 0.1717, pedigree (4,3,3,1,5)
  Based on data from IMO (2015) and Sternersen (2017)
- Water [water, ocean]: 6.42 m3; lognormal variance with pedigree 0.1792, pedigree (4,5,3,3,5)
  Environmental report of Greek site

## Sampling procedure
Literature.
The energy use of the evaporation process is based on the average values of different scientific publications summarized in Pospíšil et al. 2019 (qualified estimates). The material consumption of the evaporation process calculated based on figures given in an environmental study for a LNG terminal in Greece (Asprofos Engineering 2014) (qualified estimates). The infrastructure requirements are based on rough estimates.
Reference(s):
Pospíšil J., Charvát P., Arsenyeva O., Klimeš L., Špiláček M. and Klemeš J. J. (2019) Energy demand of liquefaction and regasification of natural gas and the potential of LNG for operative thermal energy storage. In: Renewable and Sustainable Energy Reviews, 99, pp. 1-15, 10.1016/j.rser.2018.09.027
Asprofos Engineering 2014 Asprofos Engineering (2014) Cumulative Impacts Assessment for the 2nd Upgrade of the LNG Terminal in Revithoussa Island, Greece.

## Extrapolations
The technology mix in Europe, i.e., 60% open rack vaporizers (ORV) and 40% submerged combustion vaporizers according to Agarwal et al. (2017; in Bussa et al. 2022), is also assumed for other geographies in the database.
