# sodium ethoxide production

Dataset: EcoSpold 2, unit process
Geography: RoW
Time period: 2010-01-01 to 2022-12-31
Technology level: current
Classification: ISIC rev.4 ecoinvent: 2011:Manufacture of basic chemicals
Synonyms: C2H5ONa
Scenario: Business-as-Usual
System model: Allocation at the point of substitution
Share of production covered: 100 %
Generated by: Jürgen Sutter
Database: ecoinvent
isCopyrightProtected: true

## General comment
The process “sodium ethoxide, at plant, GLO" is modelled for the production of sodium ethoxide from ethanol. Raw materials are modelled with a stoechiometric calculation. Emissions are estimated. Energy consumptions, infrastructure and transports are calculated with standard values.
Sodium ethoxide (C2H5ONa; 141-52-6) is a white to yellow powder. It is a strong base. It reacts with water vigorously to give ethanol, which is flammable, and sodium hydroxide, which is corrosive. Sodium ethoxide can be produced by reacting sodium hydroxide with ethanol:
C2H6O + Na → C2H5ONa + H2O

Sodium ethoxide is commonly used in the Claisen condensation and malonic ester synthesis, if an ethyl ester is one of the reactants. Sodium ethoxide may either deprotonate the α-position of the ester, or the ester may undergo nucleophilic substitution. If the starting material is an ethyl ester, no scrambling may occur since the product is identical to the starting material.
Frischknecht R., Jungbluth N., Althaus H.-J., Doka G., Dones R., Heck T., Hellweg S., Hischier R., Nemecek T., Rebitzer G. and Spielmann M. (2007) Overview and Methodology. Final report ecoinvent v2.0 No. 1. Swiss Centre for Life Cycle Inventories, Dübendorf, CH, retrieved from: www.ecoinvent.org.

Gendorf (2000) Umwelterklärung 2000, Werk Gendorf. Werk Gendorf, Burgkirchen as pdf-File under: http://www.gendorf.de/pdf/umwelterklaerung2000.pdf

Jürgen Falbe, Helmut Bahrmann, Wolfgang Lipps, Dieter Mayer: Alcohols, Aliphatic. Published online: 2002. In: Ullmann's Encyclopedia of Industrial Chemistry, Seventh Edition, 2004 Electronic Release (ed. Fiedler E., Grossmann G., Kersebohm D., Weiss G. and Witte C.). 7 th Electronic Release Edition. Wiley InterScience, New York, Online-Version under: DOI: 10.1002/14356007.a01_279

## Included activities end
production of sodium ethoxide including materials, energy uses, infrastructure, and emissions

## Geography
The inventory is modelled for the world.

## Technology
reaction of ethanol with sodium hydroxide

## Time period
Time of publications

## Parameters
- fraction, cooling water, cooling pond system, to air: 0.032 dimensionless; name fraction_CW_CP_to_air; lognormal variance with pedigree 0.0413, pedigree (2,3,1,3,1)
  Calculated based on literature value (Scown, C.D., 2011, Water Footprint of U.S. Transportation Fuels and supplying information of the article) (Vionnet, S., Quantis Water Database - Technical Report, 2012).
- fraction, cooling water, once-through system, to air: 0.004 dimensionless; name fraction_CW_OT_to_air; lognormal variance with pedigree 0.0413, pedigree (2,3,1,3,1)
  (same comment as for fraction, cooling water, cooling pond system, to air)
- fraction, cooling water, recirculating system, to air: 0.771 dimensionless; name fraction_CW_R_to_air; lognormal variance with pedigree 0.0413, pedigree (2,3,1,3,1)
  (same comment as for fraction, cooling water, cooling pond system, to air)
- fraction, cooling water, to air: 0.3875 dimensionless; name fraction_CW_to_air; = (0.5*fraction_CW_OT_to_air)+(0.5*fraction_CW_R_to_air); lognormal variance with pedigree 0.092025, pedigree (4,4,3,2,4)
  Calculated value based on literature value (see comments of the other parametres present in this dataset) and expert opinion. In the case when no industry/literature data are available about the type of cooling or directly fraction, cooling water, to air specific for the process a default assumption is applied. It is assumed that the once-through cooling system is used in 50% of all cases and recirculating system is used in another 50% of all cases.

## Reference product
- sodium ethoxide: 1 kg; By-product classification allocatable product; CPC 341: Basic organic chemicals; CAS 141-52-6
  EcoSpold01Location=RER
  production volume 6.7e6 kg
    Expert judgement
  property carbon content, fossil 0.353001
    Calculated based on molecular structure. See tab "chemicals".
  property heating value, net 19.6 MJ
    LHV is calculated based on the elemental composition of the substance. Based on the name of the substance, the chemical formula of the substance is manually found to be: C2H5NaO.
  property price 0.657311 EUR2005
    Calculated based on inputs: The price of the product has been calculated as a sum of the values of the material and energy inputs for this product. This value is therefore a rough estimation. It may underestimate the real price since there are additional expenses when producing any product. These expences can include for example labour costs, treatment of waste materials and profit for the producer. Please consider carefully whether this level of data quality is acceptable for your application.
  properties: carbon allocation 0.353001 kg, carbon content 0.353001, carbon content, non-fossil 0, dry mass 1 kg, water content 0, water in wet mass 0 kg, wet mass 1 kg

## Inputs from technosphere
- chemical factory, organics: 4e-10 unit; lognormal variance with pedigree 0.3184, pedigree (4,5,5,5,5)
  No information was readily available about infrastructure and land-use of production plants. Therefore, in this study, the infrastructure is estimated based on the module "chemical plant, organics". This module assumes a built area of about 4.2 ha, an average output of 50'000 t/a, and plant life of fifty years. For this study, the estimated value is 4.00 E-10 units per kg of produced chemical.
  EcoSpold01Location=RER
  Uncertainty: Estimation
- electricity, medium voltage: 0.0758844, 0.0236784, 0.000705141, 0.00359792, 0.217251, 0.0118833 kWh (6 suppliers, which the file names only by identifier); sum of these 0.333 kWh; lognormal variance with pedigree 0.1786, pedigree (4,5,5,5,5)
  There was no information available on the amount of energy used for the production process. In order not to neglect the process energy demand those values were approximated with data from an large chemical plant site in Germany producing 2.05 Mt a-1 (intermediates included) of different chemicals (Gendorf (2000)). The values for the energy consumption per kg of product of this plant (3.2 MJ kg-1) were used as approximation for the energy consumption. This total energy demand contains a split of 50% natural gas, 38% electricity and 12% steam from external energy sources. For this inventory all energy used for heat or steam was assumed to be natural gas. For this inventory an amount of 2 MJ natural gas and 0.333 kW electricity per kg product was used.
  EcoSpold01Location=UCTE
  Uncertainty: Estimation
- ethanol, without water, in 99.7% solution state, from ethylene: 0.71207 kg; lognormal variance with pedigree 0.0335, pedigree (4,5,4,1,1)
  As there was no data available for the production of sodium ethoxide, the values for the consumption of the raw materials are calculated with an assumed yield of 95 % (Frischknecht et al. 2007).
  EcoSpold01Location=RER
  Uncertainty: Stoechiometric calculation
  properties: carbon content, fossil 0.521739, dry mass 1 kg, heating value, net 28.1 MJ, wet mass 1 kg
  note on heating value, net: Based on literature, page 275, Report 17: Jungbluth, N., Chudacoff, M., Dauriat, A., Dinkel, F., Doka, G., Faist Emmenegger, M., Gnansounou, E., Kljun, N., Schleiss, K., Spielmann, M., Stettler, C., Sutter, J. 2007: Life Cycle Inventories of Bioenergy. ecoinvent report No. 17, Swiss Centre for Life Cycle Inventories, Dübendorf, CH.
- heat, from steam, in chemical industry: 2 MJ; lognormal variance with pedigree 0.1786, pedigree (4,5,5,5,5)
  EcoSpold01Location=RER
  There was no information available on the amount of energy used for the production process. In order not to neglect the process energy demand those values were approximated with data from an large chemical plant site in Germany producing 2.05 Mt a-1 (intermediates included) of different chemicals (Gendorf (2000)). The values for the energy consumption per kg of product of this plant (3.2 MJ kg-1) were used as approximation for the energy consumption. This total energy demand contains a split of 50% natural gas, 38% electricity and 12% steam from external energy sources. For this inventory all energy used for heat or steam was assumed to be natural gas. For this inventory an amount of 2 MJ natural gas and 0.333 kW electricity per kg product was used.
  Uncertainty: Estimation
  properties: heating value, net 1 MJ
- hydrochloric acid, without water, in 30% solution state: 0.045666 kg; lognormal variance with pedigree 0.0335, pedigree (4,5,4,1,1)
  The unreacted sodium hydroxide is considered to be neutralized with hydrogen chloride.
  EcoSpold01Location=RER
  Uncertainty: Stoechiometric calculation
  properties: dry mass 1 kg, heating value, net 3.32 MJ, wet mass 1 kg
- sodium hydroxide, without water, in 50% solution state: 0.6192 kg; lognormal variance with pedigree 0.0335, pedigree (4,5,4,1,1)
  (same comment as for ethanol, without water, in 99.7% solution state, from ethylene)
  properties: dry mass 1 kg, heating value, net 3.03 MJ, wet mass 1 kg

## Inputs from nature
- Water, cooling, unspecified natural origin [natural resource, in water]: 0.024 m3; name water_cooling_UNO_input; lognormal variance with pedigree 0.0335, pedigree (4,5,4,1,1)
  There was no information available on the amount of cooling water used within the plant. In order not to neglect the process cooling water demand this value was approximated with data from an large chemical plant site in Germany producing 2.05 Mt a-1 (intermediates included) of different chemicals (Gendorf 2000). In this plant in total an average 24 kg water per kg of product were used for. This value was used in this inventory as approximation for the cooling water consumption.
  There was no information available on the amount of cooling water used within the plant. In order not to neglect the process cooling water demand this value was approximated with data from an large chemical plant site in Germany producing 2.05 Mt a-1 (intermediates included) of different chemicals (Gendorf 2000). In this plant in total an average 24 kg water per kg of product were used for. This value was used in this inventory as approximation for the cooling water consumption.
  Uncertainty: Estimation

## Emissions to nature
- Carbon dioxide, fossil [air, urban air close to ground]: 0.0613 kg; lognormal variance with pedigree 0.1786, pedigree (4,5,5,5,5)
  The carbon contained in the removed ethanol is accounted as CO2 emissions to air.
  Uncertainty: Estimation
- Ethanol [air, urban air close to ground]: 0.0014241 kg; lognormal variance with pedigree 0.1786, pedigree (4,5,5,5,5)
  There was no data available on process emissions to air for the sodium ethoxide production. As approximation the air emissions occurring from the purge vent, the distillation vent and fugitive emission sources were estimated to 0.2% of the ethanol input.
  Uncertainty: Estimation
- Water [air, unspecified]: 0.0093 m3; name water_to_air_unspecified; = water_cooling_UNO_input*fraction_CW_to_air; lognormal variance with pedigree 0.130025, pedigree (4,4,5,2,4)
  Calculated value based on literature values and expert opinion. See comments in the parametres' comment field.
  property fraction, origin: fresh water 0; name fraction_origin_fresh_water
  property fraction, origin: salt water 0; name fraction_origin_salt_water
  property fraction, origin: unspecified 1; name fraction_origin_unspecified
- BOD5, Biological Oxygen Demand [water, surface water]: 0.007122 kg; lognormal variance with pedigree 0.218, pedigree (4,5,5,5,5)
  The values for COD, BOD, TOC, and DOC used in this inventory are calculated from the amount of organic substancesl in the treated waste water assuming a carbon conversion of 96% for COD. For the calculation of the values for BOD and DOC the worst case scenario BOD = COD and TOC = DOC is used.
  Uncertainty: Estimation
- COD, Chemical Oxygen Demand [water, surface water]: 0.007122 kg; lognormal variance with pedigree 0.218, pedigree (4,5,5,5,5)
  (same comment as for BOD5, Biological Oxygen Demand)
- Chloride [water, surface water]: 0.044397 kg; lognormal variance with pedigree 0.3184, pedigree (4,5,5,5,5)
  The remaining sodium hydroxide is considered to be neutralized with hydrogen chloride. From this neutralization sodium and chloride emissions to water are calculated.
  Uncertainty: Estimation
- DOC, Dissolved Organic Carbon [water, surface water]: 0.0018565 kg; lognormal variance with pedigree 0.218, pedigree (4,5,5,5,5)
  (same comment as for BOD5, Biological Oxygen Demand)
- Ethanol [water, surface water]: 0.0035604 kg; lognormal variance with pedigree 0.3184, pedigree (4,5,5,5,5)
  The remaining amount of unreacted ethanol is assumed to leave the production process with the waste water. Further it was assumed that this wastewater is treated in a internal wastewater plant. The removal efficiency for ethanol is assumed with 90%. The carbon contained in the removed ethanol is accounted as CO2 emissions to air.
  Uncertainty: Estimation
- Sodium I [water, surface water]: 0.017802 kg; lognormal variance with pedigree 0.6642, pedigree (4,5,5,5,5)
  (same comment as for Chloride)
- TOC, Total Organic Carbon [water, surface water]: 0.0018565 kg; lognormal variance with pedigree 0.218, pedigree (4,5,5,5,5)
  (same comment as for BOD5, Biological Oxygen Demand)
- Water [water, unspecified]: 0.0147 m3; name water_to_water_unspecified; = water_cooling_UNO_input*(1-fraction_CW_to_air); lognormal variance with pedigree 0.130025, pedigree (4,4,5,2,4)
  (same comment as for Water)
  property fraction, origin: fresh water 0; name fraction_origin_fresh_water_Ww
  property fraction, origin: salt water 0; name fraction_origin_salt_water_Ww
  property fraction, origin: unspecified 1; name fraction_origin_unspecified_Ww

## Sampling procedure
Literature data

## Extrapolations
Emissions are modelled with standard methods.
