# liquid manure spreading, by vacuum tanker

Dataset: EcoSpold 2, unit process
Geography: CA-QC
Time period: 1991-01-01 to 2022-12-31
Technology level: current
Classification: EcoSpold01Categories: agricultural means of production/work processes
Classification: ISIC rev.4 ecoinvent: 0161:Support activities for crop production
Synonyms: by vacuum tanker; slurry spreading
Scenario: Business-as-Usual
System model: Allocation at the point of substitution
Generated by: Dominique Maxime
Published in: Nemecek, T. 2007
Database: ecoinvent
isCopyrightProtected: true

## General comment
This dataset represents the service of mixing and then pumping 1 m3 liquid slurry (1 t) from farm pit into tanker (average capacity 24.7 m3), and spreading the slurry onto field (low height nozzle spraying). Slurry production and any emission from slurry are not included.
Child dataset exchanges scaled from GLO parent dataset based on diesel consumption in Quebec. Created to proxy farm machinery/fieldwork representative of the Quebec context. Data quality indicators adjusted accordingly. Other difference with the parent dataset is the production volume, which now represents the production volume in Quebec.
Diesel consumption is calculated from primary data and models from the American Society of Agricultural and Biological Engineers (ASABE) published in 2006 and might be representative of more recent technology than the GLO parent dataset.

## Included activities start
Liquid manure loading and spreading process starting from preliminary work at farm, like attaching the adequate machinery to the tractor

## Included activities end
This activity ends with transfer back to farm and concluding work, like uncoupling the machine. The dataset includes mixing the slurry before pumping into tanker at farm; transfer to field; field spreading of 1 m3 of slurry, including field turning, idling and overlapping. The inventory takes into account the diesel fuel consumption and the amount of agricultural machinery and of the shed, which has to be attributed to the slurry loading and spreading. Also taken into consideration is the amount of emissions to the air from combustion and the emission to the soil from tyre abrasion during the work process. The amount of spread material is not taken into account, nor dust other than from combustion and noise.

## Geography
Child dataset exchanges scaled from parent dataset based on diesel consumption in Quebec. Created to proxy farm machinery/fieldwork representative of the Quebec context. Data quality indicators adjusted accordingly.
References

CRAAQ 2012
Beauregard, 2013

## Technology
Emissions by the newest models of tractors set into operation during the period from 1999 to 2001.

## Time period
Measurements were made in the last few years (1999-2001).
Diesel consumption is calculated from primary data and models from the American Society of Agricultural and Biological Engineers (ASABE) published in 2006 and might be representative of more recent time period than the GLO parent dataset.

## Parameters
- ecoinvent diesel consumption (kg/kg): 0.000217 kg/kg; name EI_diesel_per_kg; lognormal variance with pedigree 0.004, pedigree (1,4,1,5,1)
  Diesel consumption in the parent dataset (ecoinvent); kg diesel/kg slurry, assuming a specific weight of 1000 kg/m3 slurry (Nemecek et al., 2007)
- farm machinery diesel consumption ratio: 3.80184 dimensionless; name machine_diesel_ratio; = qc_diesel_per_kg/ EI_diesel_per_kg
  Ratio of diesel consumption for tractor and its machinery: kg diesel per ha of the Quebec machinery/kg diesel per ha of the ecoinvent"s parent machinery
- quebec diesel consumption (kg/kg): 0.000825 kg/kg; name qc_diesel_per_kg; lognormal variance with pedigree 0.00088, pedigree (1,2,1,2,1)
  Diesel consumption of tractor and machinery within the Québec context; kg diesel/kg slurry, assuming a specific weight of 1000 kg/m3 slurry (CRAAQ, 2007).

## Reference product
- liquid manure spreading, by vacuum tanker: 1 m3; By-product classification allocatable product; CPC 86119: Other support services to crop production
  production volume 7.70886e6 m3
    Liquid animal manure production in Quebec is accounted for swine from the 2008-2012 average number of animals (Statistics Canada, 2013a), manure excretion rates per animal category (Statistics Canada, 2006; 2001), animal confinement factors (Kellog et al., 2000), additional mass of water from cleaning and precipitation (Seydoux et al., 2004), and liquid manure recoverability factors (Kellog et al., 2000). Liquid animal manure accounts for 39% (humid w/w) of total animal manure
    References:
    Kellogg, R.L., C.H. Lander, D.C. Moffitt, and N. Gollehon (2000). Manure nutrients relative to the capacity of cropland and pasture land to assimilate nutrients: Spatial and temporal trends for the United States. USDA-NRCS-ERS Publication No. nps00-0579. (http://www.nrcs.usda.gov/Internet/FSE_DOCUMENTS/nrcs143_012133.pdf)
    Statistics Canada (2001). Répartition et concentration des animaux de ferme au Canada. Appendix C (http://publications.gc.ca/Collection/Statcan/21-601-MIF/entire_f47.pdf)
    Statistics Canada (2013a). CANSIM Table 003-0032 - Number of cattle, by class and farm type. (http://www5.statcan.gc.ca/cansim/a01?lang=eng)
    Statistics Canada (2006). A Geographical Profile of Manure Production in Canada, 2001. (http://www.statcan.gc.ca/pub/21-601-m/21-601-m2006077-eng.pdf)
    Seydoux, S., D. Côté, M. Grenier et Comité technique porc (2004). Caractérisation des volumes et des concentrations en éléments fertilisants des déjections animales liquides en Chaudière-Appalaches. IRDA. 75 p.
    MDDEP (2011). Bilan 2010 du recyclage des matières résiduelles fertilisantes, Québec, Ministère du Développement durable, de l’Environnement et des Parcs, Direction des matières résiduelles et des lieux contaminés, ISBN 978-2-550-63377-8, 30 pages. (http://www.mddep.gouv.qc.ca/matieres/mat_res/fertilisantes/bilan2010.pdf)
  property price 0.843653 EUR2005
    Calculated based on inputs: The price of the product has been calculated as a sum of the values of the material and energy inputs for this product. This value is therefore a rough estimation. It may underestimate the real price since there are additional expenses when producing any product. These expences can include for example labour costs, treatment of waste materials and profit for the producer. Please consider carefully whether this level of data quality is acceptable for your application.
  properties: carbon allocation 0 kg, carbon content 0

## Inputs from technosphere
- diesel: 0.825 kg; lognormal variance with pedigree 0.044, pedigree (1,4,5,5,1)
  Scaling to Quebec diesel consumption
  properties: carbon content, fossil 0.865, dry mass 1 kg, heating value, net 42.8 MJ, wet mass 1 kg
  note on carbon content, fossil: C-content of diesel is 86.5% (ecoinvent v2.2 report 6_IV, Tab 3.14)
- liquid manure tank trailer: 0.0563 kg; lognormal variance with pedigree 0.044, pedigree (1,4,5,5,1)
- shed: 0.00019 m2; lognormal variance with pedigree 0.344, pedigree (1,4,5,5,1)
- tractor, 4-wheel, agricultural: 0.0275 kg; lognormal variance with pedigree 0.044, pedigree (1,4,5,5,1)

## Emissions to nature
- Ammonia [air, non-urban air or from high stacks]: 1.6462e-5 kg; lognormal variance with pedigree 0.1001, pedigree (1,2,5,5,3)
  Scaling to Quebec diesel consumption
- Benzene [air, non-urban air or from high stacks]: 6.00691e-6 kg; lognormal variance with pedigree 0.1001, pedigree (1,2,5,5,3)
  Scaling to Quebec diesel consumption
- Benzo(a)pyrene [air, non-urban air or from high stacks]: 2.4712e-8 kg; lognormal variance with pedigree 0.7001, pedigree (1,2,5,5,3)
  Scaling to Quebec diesel consumption
- Cadmium II [air, non-urban air or from high stacks]: 8.25e-9 kg; lognormal variance with pedigree 0.7001, pedigree (1,2,5,5,3)
  Scaling to Quebec diesel consumption
- Carbon dioxide, fossil [air, non-urban air or from high stacks]: 2.56244 kg; lognormal variance with pedigree 0.0601, pedigree (1,2,5,5,3)
  Scaling to Quebec diesel consumption
- Carbon monoxide, fossil [air, non-urban air or from high stacks]: 0.00593088 kg; lognormal variance with pedigree 0.694, pedigree (1,4,5,5,1)
  Scaling to Quebec diesel consumption
- Chromium III [air, non-urban air or from high stacks]: 4.10599e-8 kg; lognormal variance with pedigree 0.7001, pedigree (1,2,5,5,3)
  Scaling to Quebec diesel consumption
- Copper ion [air, non-urban air or from high stacks]: 1.39908e-6 kg; lognormal variance with pedigree 0.7001, pedigree (1,2,5,5,3)
  Scaling to Quebec diesel consumption
- Dinitrogen monoxide [air, non-urban air or from high stacks]: 9.88479e-5 kg; lognormal variance with pedigree 0.1001, pedigree (1,2,5,5,3)
  Scaling to Quebec diesel consumption
- Methane, fossil [air, non-urban air or from high stacks]: 0.000106452 kg; lognormal variance with pedigree 0.1001, pedigree (1,2,5,5,3)
  Scaling to Quebec diesel consumption
- NMVOC, non-methane volatile organic compounds [air, non-urban air or from high stacks]: 0.00262327 kg; lognormal variance with pedigree 0.084, pedigree (1,4,5,5,1)
  Scaling to Quebec diesel consumption
- Nickel II [air, non-urban air or from high stacks]: 5.7788e-8 kg; lognormal variance with pedigree 0.7001, pedigree (1,2,5,5,3)
  Scaling to Quebec diesel consumption
- Nitrogen oxides [air, non-urban air or from high stacks]: 0.0355853 kg; lognormal variance with pedigree 0.084, pedigree (1,4,5,5,1)
  Scaling to Quebec diesel consumption
- PAH, polycyclic aromatic hydrocarbons [air, non-urban air or from high stacks]: 2.71071e-6 kg; lognormal variance with pedigree 0.3601, pedigree (1,2,5,5,3)
  Scaling to Quebec diesel consumption
- Particulate Matter, < 2.5 um [air, non-urban air or from high stacks]: 0.00327719 kg; lognormal variance with pedigree 0.3601, pedigree (1,2,5,5,3)
  Scaling to Quebec diesel consumption
- Selenium IV [air, non-urban air or from high stacks]: 8.25e-9 kg; lognormal variance with pedigree 0.1001, pedigree (1,2,5,5,3)
  Scaling to Quebec diesel consumption
- Sulfur dioxide [air, non-urban air or from high stacks]: 0.000828802 kg; lognormal variance with pedigree 0.0601, pedigree (1,2,5,5,3)
  Scaling to Quebec diesel consumption
- Zinc II [air, non-urban air or from high stacks]: 8.25e-7 kg; lognormal variance with pedigree 0.7001, pedigree (1,2,5,5,3)
  Scaling to Quebec diesel consumption
- Cadmium II [soil, agricultural]: 2.11e-8 kg; lognormal variance with pedigree 0.084, pedigree (1,4,5,5,1)
  Emission from tyre abrasion, not related to diesel consumption
- Lead II [soil, agricultural]: 9.15e-8 kg; lognormal variance with pedigree 0.084, pedigree (1,4,5,5,1)
  Emission from tyre abrasion, not related to diesel consumption
- Zinc II [soil, agricultural]: 5.59e-5 kg; lognormal variance with pedigree 0.084, pedigree (1,4,5,5,1)
  Emission from tyre abrasion, not related to diesel consumption

## Sampling procedure
The inventoried HC, NOx, CO and fuel consumption values are measurements made following two test cycles (ISO 8178 C1 test and a specific 6-level-test created by the FAT) and on measurements made during the field work. The other emissions were calculated basing on literature data and the measured fuel consumption.

## Extrapolations
Values given in the reference are representative for the chosen work processes. Dataset based on GLO parent dataset which was extrapolated from CH geography context without modification of exchanges. Processes are typical procedures for Switzerland around the year 2000, they are not statistical average processes. This dataset has been adapted only for diesel input representative of the Quebec context and for combustion emissions scaled from the difference in diesel consumption. The uncertainty has been adjusted accordingly.

## Review by Christian Bauer 2013-11-20
passed
