# combine harvesting

Dataset: EcoSpold 2, unit process
Geography: CA-QC
Time period: 1991-01-01 to 2022-12-31
Technology level: current
Classification: ISIC rev.4 ecoinvent: 0161:Support activities for crop production
Classification: EcoSpold01Categories: agricultural means of production/work processes
Scenario: Business-as-Usual
System model: Allocation at the point of substitution
Generated by: Dominique Maxime
Published in: Nemecek, T. 2007
Database: ecoinvent
isCopyrightProtected: true

## General comment
This dataset represents the service of combine harvesting for one hectare. The working width is 7.6 m (average).
[This dataset was already contained in the ecoinvent database version 2. It was not individually updated during the transfer to ecoinvent version 3. Life Cycle Impact Assessment results may still have changed, as they are affected by changes in the supply chain, i.e. in other datasets. This dataset was generated following the ecoinvent quality guidelines for version 2. It may have been subject to central changes described in the ecoinvent version 3 change report (http://www.ecoinvent.org/database/ecoinvent-version-3/reports-of-changes/), and the results of the central updates were reviewed extensively. The changes added e.g. consistent water flows and other information throughout the database. The documentation of this dataset can be found in the ecoinvent reports of version 2, which are still available via the ecoinvent website. The change report linked above covers all central changes that were made during the conversion process.]
Diesel consumption is calculated from primary data and models from the American Society of Agricultural and Biological Engineers (ASABE) published in 2006 and might be representative of more recent technology than the GLO parent dataset.
Warning: If the parent value for diesel consumption (in the GLO parent dataset) is changed in future edition, the user must change the parameter "ecoinvent diesel consumption" accordingly in order to get the right ratio of qc/ecoinvent diesel consumption.
Child dataset exchanges scaled from GLO parent dataset based on diesel consumption in Quebec. Created to proxy farm machinery/fieldwork representative of the Quebec context. Data quality indicators adjusted accordingly. Other difference with the parent dataset is the production volume, which now represents the production volume in Quebec.

## Included activities start
The combine harvesting process starts with preliminary work at the farm, like attaching the adequate machine to the tractor.

## Included activities end
This activity ends with transfer back to farm and concluding work, like uncoupling the machine.The inventory includes transfer to field; field work (for a parcel of land of 1 ha surface); the diesel fuel consumption and the amount of agricultural machinery and of the shed, which has to be attributed to the harvesting by combined harvester. Also taken into consideration is the amount of emissions to the air from combustion and the emission to the soil from tyre abrasion during the work process. The overlapping during the field work is considered. The amount of harvested fodder is not taken into account. Not included are dust other than from combustion and noise. The grain production and straw treatment are not included.

## Geography
Child dataset air emissions related to diesel combustion are scaled from parent dataset (GLO) based on the ratio of diesel consumption in Quebec over diesel consumption of GLO. Created to proxy farm machinery/fieldwork representative of the Quebec context. Data quality indicators adjusted accordingly.

## Technology
Fuel consumption has been extrapolated to Quebec, but emissions per kg diesel were taken from the original values.

## Time period
The emissions per kg of combusted Diesel were taken from the original values but the Diesel consumption has been updated.

## Parameters
- farm machinery diesel consumption ratio: 0.464865 dimensionless; name machine_diesel_ratio; = qc_diesel/ EI_diesel
  Ratio of diesel consumption for tractor and its machinery: kg diesel per ha of the Quebec machinery/kg diesel per ha of the ecoinvent"s parent machinery
- parent dataset diesel consumption: 33.3 kg/unit; name EI_diesel; lognormal variance with pedigree 0.004, pedigree (1,4,1,5,1)
  Diesel consumption in the parent agricultural fieldwork dataset in kg/ha diesel
- qc child dataset diesel consumption: 15.48 kg/unit; name qc_diesel; lognormal variance with pedigree 0.007628, pedigree (1,4,1,5,1)
  Diesel consumption in the Québec agricultural fieldwork dataset in kg/ha diesel
- quebec cropped area: 1.87476e6 ha; name qc_crop_area; lognormal variance with pedigree 0.0006, pedigree (1,1,1,1,1)
  Land in crops, Quebec, in 2011. Source: Statistics Canada, 2013. Table 004-0002 - Census of Agriculture, total area of farms and use of farm land, CANSIM (database). (accessed: 2013-11-15) ("Land in crops" includes field crops, vegetables, fruits and nursery crops, and sod.) Statistics Canada
- world arable land area: 1.39628e9 ha; name world_arable_area; lognormal variance with pedigree 0.0006, pedigree (1,1,1,1,1)
  Arable land area, World, in 2011. Source: FAOSTAT, 2013

## Reference product
- combine harvesting: 1 ha; By-product classification allocatable product; CPC 86119: Other support services to crop production
  production volume 949717 ha
    Total area combine harvested in Québec down-scaled from total world area combine harvested (production volume of the GLO parent dataset) through the ratio of cropped area in the two regions (see mathematical relation and parameters). source of GLO volume: Faostat. Including: Cereals,Total + (Total), Coarse Grain, Total + (Total), Fibre Crops Primary + (Total), Jute & Jute-like Fibres + (Total), Oilcrops Primary + (Total). Assuming 33% mechanisation.
  property price 54.5278 EUR2005
    Calculated based on inputs: The price of the product has been calculated as a sum of the values of the material and energy inputs for this product. This value is therefore a rough estimation. It may underestimate the real price since there are additional expenses when producing any product. These expences can include for example labour costs, treatment of waste materials and profit for the producer. Please consider carefully whether this level of data quality is acceptable for your application.
  properties: carbon allocation 0 kg, carbon content 0

## Inputs from technosphere
- diesel: 15.48 kg; lognormal variance with pedigree 0.044, pedigree (1,4,5,5,1)
  Scaling to Quebec diesel consumption
  properties: carbon content, fossil 0.865, dry mass 1 kg, heating value, net 42.8 MJ, wet mass 1 kg
  note on carbon content, fossil: C-content of diesel is 86.5% (ecoinvent v2.2 report 6_IV, Tab 3.14)
- harvester: 6.3 kg; lognormal variance with pedigree 0.044, pedigree (1,4,5,5,1)
  The same amount of machinery use as in the parent dataset is used as a proxy.
- shed: 0.00858 m2; lognormal variance with pedigree 0.344, pedigree (1,4,5,5,1)
  The same amount of shed use for machinery as in the parent dataset is used as a proxy.

## Emissions to nature
- Ammonia [air, non-urban air or from high stacks]: 0.0003096 kg; lognormal variance with pedigree 0.1001, pedigree (1,2,5,5,3)
  Emission from diesel combustion scaled from the parent emission factor based on the relative diesel consumption.
- Benzene [air, non-urban air or from high stacks]: 0.000112962 kg; lognormal variance with pedigree 0.1001, pedigree (1,2,5,5,3)
  (same comment as for Ammonia)
- Benzo(a)pyrene [air, non-urban air or from high stacks]: 4.644e-7 kg; lognormal variance with pedigree 0.7001, pedigree (1,2,5,5,3)
  (same comment as for Ammonia)
- Cadmium II [air, non-urban air or from high stacks]: 1.548e-7 kg; lognormal variance with pedigree 0.7001, pedigree (1,2,5,5,3)
  (same comment as for Ammonia)
- Carbon dioxide, fossil [air, non-urban air or from high stacks]: 47.8811 kg; lognormal variance with pedigree 0.0601, pedigree (1,2,5,5,3)
  (same comment as for Ammonia)
- Carbon monoxide, fossil [air, non-urban air or from high stacks]: 0.148757 kg; lognormal variance with pedigree 0.694, pedigree (1,4,5,5,1)
  (same comment as for Ammonia)
- Chromium III [air, non-urban air or from high stacks]: 7.76324e-7 kg; lognormal variance with pedigree 0.7001, pedigree (1,2,5,5,3)
  (same comment as for Ammonia)
- Copper ion [air, non-urban air or from high stacks]: 2.63114e-5 kg; lognormal variance with pedigree 0.7001, pedigree (1,2,5,5,3)
  (same comment as for Ammonia)
- Dinitrogen monoxide [air, non-urban air or from high stacks]: 0.00185946 kg; lognormal variance with pedigree 0.1001, pedigree (1,2,5,5,3)
  (same comment as for Ammonia)
- Methane, fossil [air, non-urban air or from high stacks]: 0.00199892 kg; lognormal variance with pedigree 0.1001, pedigree (1,2,5,5,3)
  (same comment as for Ammonia)
- NMVOC, non-methane volatile organic compounds [air, non-urban air or from high stacks]: 0.0674054 kg; lognormal variance with pedigree 0.084, pedigree (1,4,5,5,1)
  (same comment as for Ammonia)
- Nickel II [air, non-urban air or from high stacks]: 1.08314e-6 kg; lognormal variance with pedigree 0.7001, pedigree (1,2,5,5,3)
  (same comment as for Ammonia)
- Nitrogen oxides [air, non-urban air or from high stacks]: 0.79027 kg; lognormal variance with pedigree 0.084, pedigree (1,4,5,5,1)
  (same comment as for Ammonia)
- PAH, polycyclic aromatic hydrocarbons [air, non-urban air or from high stacks]: 5.11351e-5 kg; lognormal variance with pedigree 0.3601, pedigree (1,2,5,5,3)
  (same comment as for Ammonia)
- Particulate Matter, < 2.5 um [air, non-urban air or from high stacks]: 0.0692649 kg; lognormal variance with pedigree 0.3601, pedigree (1,2,5,5,3)
  (same comment as for Ammonia)
- Selenium IV [air, non-urban air or from high stacks]: 1.548e-7 kg; lognormal variance with pedigree 0.1001, pedigree (1,2,5,5,3)
  (same comment as for Ammonia)
- Sulfur dioxide [air, non-urban air or from high stacks]: 0.0156195 kg; lognormal variance with pedigree 0.0601, pedigree (1,2,5,5,3)
  (same comment as for Ammonia)
- Zinc II [air, non-urban air or from high stacks]: 1.548e-5 kg; lognormal variance with pedigree 0.7001, pedigree (1,2,5,5,3)
  (same comment as for Ammonia)
- Cadmium II [soil, agricultural]: 8.82e-7 kg; lognormal variance with pedigree 0.084, pedigree (1,4,5,5,1)
  Emission to soil from tyre abrasion, not related to diesel combustion. The same emission factor as the parent dataset is used as a proxy.
- Lead II [soil, agricultural]: 3.78e-6 kg; lognormal variance with pedigree 0.084, pedigree (1,4,5,5,1)
  (same comment as for Cadmium II)
- Zinc II [soil, agricultural]: 0.00238 kg; lognormal variance with pedigree 0.084, pedigree (1,4,5,5,1)
  (same comment as for Cadmium II)

## Sampling procedure
Data on fuel consumption and emissions of CO, HC and NOx are expert estimations based on measurements for comparable activities. The other emissions were calculated basing on literature data and the measured fuel consumption. The fuel consumption is a weighted average calculated from the surface harvested per hour and fuel consumption per hour,

## Extrapolations
Values given in the reference are representative for the chosen work processes. Dataset based on GLO parent dataset which was extrapolated from CH geography context without modification of exchanges. Processes are typical procedures for Switzerland around the year 2000, they are not statistical average processes. This dataset has been adapted only for diesel input representative of the Quebec context and for combustion emissions scaled from the difference in diesel consumption. The uncertainty has been adjusted accordingly.
