# treatment of sewage sludge, 97% water, WWT, WW from wafer fabrication, landfarming

Dataset: EcoSpold 2, unit process
Geography: CH
Time period: 2000-01-01 to 2022-12-31
Technology level: current
Classification: ISIC rev.4 ecoinvent: 3821:Treatment and disposal of non-hazardous waste
Scenario: Business-as-Usual
System model: Allocation at the point of substitution
Generated by: Nikolia Stoikou
Database: ecoinvent
isCopyrightProtected: true

## General comment
The process represents the treatment of a waste (sewage sludge) that is exclusively produced from another waste treatment. Recommended use of this dataset: to be used within the specific chain of treatments for 'wastewater from wafer fabrication'. Share of biogenic carbon in the sludge: 0%.

## Included activities start
The activity starts with the waste being available for landfarming. Collection and transportation of the waste to this process is not included.

## Included activities end
The activity ends with the waste being treated and waste-specific emissions from the landfarming process are released to the environment (air, water and soil). The activity is considering local fate of emissions and the initial specific wastewater composition (generating the sewage sludge). Further, it includes provision of fertiliser functions for N, P, K, if present in the sludge.

## Geography
The site has mean annual temperature (MAT) of 9.5 degC, mean annual precipitation (MAP) of 1483.00559816076 mm/year, mean annual actual evaporation (EAT) of 528.63778611689 mm/year. Climate will influence the local fate emissions based on the elemental composition of the sludge as well as water evaporation to air (= consumptive water use).
References: UN data, 2020. Precipitation, Environment Statistics Database, United Nations Statistics Division Available at: http://data.un.org/Data.aspx?q=precipitation&d=ENV&f=variableID%3a6;
World Bank, 2022. Surface area (sq.km), World Bank Group Available at: https://data.worldbank.org/indicator/AG.SRF.TOTL.K2;
MeteoSwiss, 2022. Data on Swiss temperature mean, Federal Department of Home Affairs FDHA. Federal Office of Meteorology and Climatology. Swiss Climate Available at: https://www.MeteoSwiss.admin.ch/home/climate/swiss-climate-in-detail/Swiss-temperature-mean/Data-on-the-Swiss-temperature-mean.html?query=TEMPERATURE+DATA&topic=/content/MeteoSwiss/tags/topics/klima&pageIndex=0&tab=search_tab;
Doka G.,2021. A model for composition-specific life cycle inventories of regionalised wastewater fates, Zurich, Switzerland. http://www.doka.ch/publications.htm

## Technology
Landfarming is the process of spreading a substrate on agricultural soil. Sewage sludge is generated in the wastewater treatment of wastewater from wafer fabrication. Spreading of liquid sewage sludge (97w% water content) on agricultural fields with mobile vacuum tanker.

## Reference product
- organic phosphorus fertiliser, as P2O5: 1 kg; By-product classification allocatable product; CPC 34659: Fertilizers n.e.c.; lognormal variance with pedigree 0.030477, pedigree (1,1,1,1,1)
  gross fertilizer function provided from sewage sludge spreading on agricultural fields.
  Uncertainty: Uncertainty calculated from upstream wastewater technosphere fate uncertainty, wastewater composition uncertainty, and treatment model uncertainty
  production volume 5882.55 kg
    Calculated in proportion to wastewater reference product.
  property oxygen content 0.563579
    Oxygen content (on a dry matter basis) of organic phosphorus fertiliser, as P2O5 is calculated from the molecular formula of the substance (Phosphorus).
  property phosphorus content 0.436421
    Phosphorus content (on a dry matter basis) of organic phosphorus fertiliser, as P2O5 is calculated from the molecular formula of the substance (Phosphorus).
  property price 0.241 EUR2005
    Set equal to the price of the corresponding inorganic fertiliser
  properties: carbon allocation 0 kg, carbon content 0, carbon content, fossil 0, carbon content, non-fossil 0, dry mass 1 kg, water content 0, water in wet mass 0 kg, wet mass 1 kg

## Inputs from technosphere
- acetone, liquid: 1.15133e-5, 3.72264e-5 kg (2 suppliers, which the file names only by identifier); sum of these 4.87398e-5 kg
- ammonia, anhydrous, liquid: 9.79656e-7, 1.02678e-7, 2.1681e-6, 9.99919e-7, 3.77362e-6, 5.04664e-7, 4.59011e-7, 1.08589e-5, 3.24388e-7 kg (9 suppliers, which the file names only by identifier); sum of these 2.01709e-5 kg
- ammonium carbonate: 0.000161858, 7.99347e-5 kg (2 suppliers, which the file names only by identifier); sum of these 0.000241792 kg
- argon, liquid: 2.60231e-5, 0.000123535 kg (2 suppliers, which the file names only by identifier); sum of these 0.000149558 kg
- arsine: 3.78296e-10 kg
- chemical, inorganic: 6.57428e-6 kg
- chlorine, liquid: 3.51892e-7, 7.03916e-8 kg (2 suppliers, which the file names only by identifier); sum of these 4.22284e-7 kg
- diborane: 3.78296e-10 kg
- electricity, medium voltage: 0.133547 kWh
- heat, district or industrial, natural gas: 0.285282 MJ
- helium: 1.49558e-5 kg
- hexafluoroethane: 4.39877e-6 kg
- hexamethyldisilazane: 1.93546e-6 kg
- hydrochloric acid, without water, in 30% solution state: 4.30251e-5, 0.00019266 kg (2 suppliers, which the file names only by identifier); sum of these 0.000235685 kg
- hydrogen fluoride: 5.7792e-6, 1.69547e-5 kg (2 suppliers, which the file names only by identifier); sum of these 2.27339e-5 kg
- hydrogen peroxide, without water, in 50% solution state: 9.65769e-5, 2.03443e-5 kg (2 suppliers, which the file names only by identifier); sum of these 0.000116921 kg
- hydrogen, liquid: 3.64445e-6, 1.66779e-5 kg (2 suppliers, which the file names only by identifier); sum of these 2.03223e-5 kg
- isopropanol: 0.000146788, 3.09214e-5 kg (2 suppliers, which the file names only by identifier); sum of these 0.000177709 kg
- methyl-3-methoxypropionate: 0.000130203 kg
- monoethanolamine: 0.000124924 kg
- nitric acid, without water, in 50% solution state: 1.58541e-6, 2.0625e-5, 2.35568e-6, 5.85814e-6, 7.61833e-6, 2.80691e-6, 9.65397e-6, 2.5451e-6, 2.34696e-6, 1.78859e-5 kg (10 suppliers, which the file names only by identifier); sum of these 7.32814e-5 kg
- nitrogen, liquid: 0.0192104, 0.00527314 kg (2 suppliers, which the file names only by identifier); sum of these 0.0244836 kg
- oxygen, liquid: 0.000222947, 0.000812524 kg (2 suppliers, which the file names only by identifier); sum of these 0.00103547 kg
- phosphane: 1.49558e-9 kg
- phosphoric acid, industrial grade, without water, in 85% solution state: 0.00018234 kg
- photovoltaic cell factory: 7.05959e-12 unit
- silicone product: 2.66655e-7, 5.42706e-7 kg (2 suppliers, which the file names only by identifier); sum of these 8.09361e-7 kg
- single-Si wafer, for electronics: 8.79764e-6 m2
- sodium hydroxide, without water, in 50% solution state: 0.000725895 kg
- sulfur hexafluoride, liquid: 1.89043e-7, 3.82789e-7 kg (2 suppliers, which the file names only by identifier); sum of these 5.71832e-7 kg
- sulfuric acid: 0.000586293, 7.66994e-5 kg (2 suppliers, which the file names only by identifier); sum of these 0.000662992 kg
- tap water: 0.409844 kg
- tetrafluoroethylene: 2.63924e-6 kg
- trichloromethane: 2.71291e-7, 4.97184e-7 kg (2 suppliers, which the file names only by identifier); sum of these 7.68475e-7 kg
- trifluoromethane: 2.72726e-6 kg
- trimethylamine: 0.000253823, 0.000125353 kg (2 suppliers, which the file names only by identifier); sum of these 0.000379176 kg
- waste, from silicon wafer production, inorganic: -4.44188e-5 kg
- wastewater from wafer fabrication: -2.24736e-6, -0.000464726 m3 (2 suppliers, which the file names only by identifier); sum of these -0.000466974 m3
- water, ultrapure: 0.203829, 0.153267, 0.109877 kg (3 suppliers, which the file names only by identifier); sum of these 0.466974 kg
- zeolite, slurry, without water, in 50% solution state: 1.6843e-5, 8.31803e-6 kg (2 suppliers, which the file names only by identifier); sum of these 2.5161e-5 kg

## Emissions to nature
- Arsine [air, urban air close to ground]: 2.05236e-12 kg
- Ethane, 1,1,2-trichloro-1,2,2-trifluoro-, CFC-113 [air, urban air close to ground]: 8.35635e-9 kg
- Ethane, hexafluoro-, HFC-116 [air, urban air close to ground]: 5.75896e-7 kg
- Hydrogen fluoride [air, urban air close to ground]: 2.38734e-6 kg
- Methanol [air, urban air close to ground]: 8.06652e-9 kg
- NMVOC, non-methane volatile organic compounds [air, urban air close to ground]: 2.01801e-5 kg
- Phosphine [air, urban air close to ground]: 1.52195e-10 kg
- Water [air, unspecified]: 5.34858e-5 m3
- Sulfuric acid [soil, agricultural]: 2.28292e-10 kg
- Water [water, unspecified]: 0.000356358 m3
