# treatment of sewage sludge, 75% water, WWT, WW from pig iron production, sanitary landfill

Dataset: EcoSpold 2, unit process
Geography: RoW
Time period: 1994-01-01 to 2022-12-31
Technology level: current
Classification: ISIC rev.4 ecoinvent: 3821:Treatment and disposal of non-hazardous waste
Scenario: Business-as-Usual
System model: Allocation at the point of substitution
Generated by: Nikolia Stoikou
Database: ecoinvent
isCopyrightProtected: true

## General comment
The process represents the treatment of a waste (sewage sludge) that is exclusively generated from another waste treatment. Sewage sludge is generated in the wastewater treatment of 'wastewater from pig iron production'. Recommended use of this dataset: to be used within the specific chain of treatments for 'wastewater from pig iron production'. Share of biogenic carbon in the sludge: 0%. Landfill gas capture and utilisation generates 0.03321 kWh of electricity and 0.0599 MJ of useful heat. 0.002598 kg waste mass remains in the landfill even after the long term period.

## Included activities start
The activity starts with the waste being available at the gate of the treatment facility. Collection and transportation of the waste to the treatment plant is not included.

## Included activities end
The activity ends with the waste being treated and waste-specific emissions from the landfill are released to the environment (air due to landfil gas and water due to landfil leachate).

## Geography
Landfill site with mean annual temperature (MAT) of 16.743579766537 degC, mean annual precipitation (MAP) of 1250.84108527132 mm/year, and net infiltration of 790.252035689178 mm/year.The leachate percolating through the landfill has an average residence time of 6.33 years.
References: UN data, 2020. Precipitation, Environment Statistics Database, United Nations Statistics Division Available at: http://data.un.org/Data.aspx?q=precipitation&d=ENV&f=variableID%3a6;
World Bank, 2022. Surface area (sq.km), World Bank Group Available at: https://data.worldbank.org/indicator/AG.SRF.TOTL.K2;
Doka G.,2021. A model for composition-specific life cycle inventories of regionalised wastewater fates, Zurich, Switzerland. http://www.doka.ch/publications.htm

## Technology
Sanitary (controlled) landfill for municipal solid waste. Ultimate average landfill height is 20 meters. Operation phase duration is 30 years. The total raw landfill gas mass produced in the landfill from this waste is 0.04321 kg. The total CH4 mass in the raw landfill gas is 0.009942 kg. Percentage of landfill gas directly emitted is 47w%. Percentage of landfill gas captured and flared is 18.02w%. Percentage of landfill gas captured and utilised is 34.98%. Conversion efficiencies are 27.8e% for electricity and 13.5e% for useful heat. Leachate generated during the first 100 years is collected and treated region-specifically before emission. Based on average waste composition and climate data the end of carbonate phase is estimated to be reached 2'863 years after waste deposition.

## Reference product
- heat, district or industrial, other than natural gas: 1 MJ; By-product classification allocatable product; CPC 17300: Steam and hot water; lognormal variance with pedigree 0.42492, pedigree (1,1,1,1,1)
  Net production of heat from landfill gas utilisation.
  Uncertainty: Uncertainty calculated depending on waste input and uncertainty of transfer coefficients in landfill to landfill gas, uncertainty in gas capture and utilisation.
  production volume 179.765 MJ
    Calculated from the production volume of the reference product in proportion to the respective output amounts.
  property corresponding fuel use, propane, furnace >100kW 0 MJ; name fuel_use
    Lower heating value of the fuel input related to the heat/electricity output, taken directly from ecoinvent v3.0 dataset "heat production, natural gas, at industrial furnace >100kW, GLO 2000".
  property price 0.0106 EUR2005
    Average European district heat price from Ecoheatcool and Euroheat 2005-2006, Ecoheat Work package 1: The European heat market. Final report. 10.6 EUR/GJ i s the price of district heat. http://www.solarthermalworld.org/files/Ecoheatcool%20WP1%20Web.pdf?download
  properties: carbon allocation 0 kg, carbon content 0, carbon content, fossil 0, carbon content, non-fossil 0, dry mass 1 kg, heating value, net 1 MJ, water content 0, water in wet mass 0 kg, wet mass 1 kg

## Inputs from technosphere
- aluminium oxide factory: 1.14831e-13 unit
- aluminium, wrought alloy: 1.24468e-7 kg
- argon, liquid: 1.65717e-7 kg
- basic oxygen furnace dust: -0.000145777, -0.000228983 kg (2 suppliers, which the file names only by identifier); sum of these -0.000374761 kg
- basic oxygen furnace dust, for recovery: 3.94026e-5 kg
- basic oxygen furnace secondary metallurgy slag: -5.81192e-6 kg
- basic oxygen furnace secondary metallurgy slag, for recovery: 2.19901e-7 kg
- basic oxygen furnace slag: -0.00202678 kg
- basic oxygen furnace slag, for recovery: 5.52305e-5 kg
- basic oxygen furnace sludge: -5.81192e-6 kg
- basic oxygen furnace sludge, for recovery: 6.16825e-7 kg
- basic oxygen furnace waste: -4.74726e-6 kg
- blast furnace: 6.04397e-14 unit
- blast furnace dust: -3.35395e-5 kg
- blast furnace dust, for recovery: 2.68868e-5 kg
- blast furnace gas: -0.0033243 MJ
- blast furnace slag: -0.00112264 kg
- blast furnace sludge: -1.71127e-5, -9.26505e-5 kg (2 suppliers, which the file names only by identifier); sum of these -0.000109763 kg
- blast furnace sludge, for recovery: 1.94513e-5 kg
- blast oxygen furnace converter: 2.57614e-13 unit
- blasting: 4.53115e-9 kg
- calcium carbide, technical grade: 2.70177e-7 kg
- chemical, organic: 1.40968e-7 kg
- coke: 0.0446376 MJ
- compressed air, 600 kPa gauge: 0.000278659 m3
- compressed air, 800 kPa gauge: 8.71505e-6 m3
- conveyor belt: 1.62957e-12 m
- copper, cathode: 1.13152e-9 kg
- diesel: 1.44999e-7, 1.92969e-10, 3.94297e-11, 2.72798e-11, 3.84568e-9, 9.27681e-12 kg (6 suppliers, which the file names only by identifier); sum of these 1.49113e-7 kg
- diesel, burned in building machine: 9.44312e-6 MJ
- dolomite: 9.81624e-5 kg
- electric arc furnace secondary metallurgy slag, for recovery: 5.52494e-6 kg
- electric arc furnace slag, for recovery: 6.88793e-6 kg
- electricity, medium voltage: 4.32026e-7, 5.83345e-7, 8.38961e-7, 1.75127e-7, 1.02577e-5, 0.000259361, 5.54002e-7, 2.07456e-7, 2.61791e-6, 8.0929e-5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 kWh (46 suppliers, which the file names only by identifier); sum of these 0.00115508 kWh
- electrode, negative, Ni: 7.3549e-9 kg
- ferromanganese, high-coal, 74.5% Mn: 0.000129075 kg
- ferronickel: 6.37569e-5 kg
- ferrosilicon: 1.07906e-8 kg
- graphite: 2.74149e-7 kg
- hard coal: 0.000364214, 7.30732e-5, 3.31339e-5, 0.000234497, 3.38124e-5, 4.93988e-5, 1.43791e-5, 7.86244e-6 kg (8 suppliers, which the file names only by identifier); sum of these 0.00081037 kg
- heat, district or industrial, natural gas: 6.2895e-6 MJ
- heat, district or industrial, other than natural gas: 4.27164e-5, 0.000106792 MJ (2 suppliers, which the file names only by identifier); sum of these 0.000149508 MJ
- industrial machine, heavy, unspecified: 3.5874e-10 kg
- inert waste: -1.70473e-7 kg
- inert waste, for final disposal: -0.000255689 kg
- iron ore concentrate: 0.00449477, 0.000493038 kg (2 suppliers, which the file names only by identifier); sum of these 0.0049878 kg
- iron pellet: 0.00117206, 0.00118975 kg (2 suppliers, which the file names only by identifier); sum of these 0.00236181 kg
- iron scrap, sorted, pressed: 0.00443763 kg
- iron sinter: 0.000695559, 0.0031231 kg (2 suppliers, which the file names only by identifier); sum of these 0.00381865 kg
- lime: 3.26085e-6 kg
- lime, hydrated, loose weight: 0.000121261 kg
- limestone, unprocessed: 2.01863e-6, 0.000631917 kg (2 suppliers, which the file names only by identifier); sum of these 0.000633935 kg
- liquefied petroleum gas: 9.1872e-10, 6.41929e-11, 9.56649e-11, 2.88408e-10, 1.36566e-8 kg (5 suppliers, which the file names only by identifier); sum of these 1.50235e-8 kg
- manganese: 2.88024e-8 kg
- mill scale: -1.28102e-6 kg
- mine infrastructure, open cast, ilmenite from hard-rock ore: 9.01804e-16 unit
- molybdenite: 8.45118e-7 kg
- natural gas, high pressure: 3.28415e-7, 1.38625e-7, 7.93942e-7, 2.35612e-7, 1.33288e-5, 1.3623e-6, 1.48707e-7, 4.38812e-9, 5.28035e-7, 5.54499e-7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 m3 (24 suppliers, which the file names only by identifier); sum of these 3.98569e-5 m3
- nickel, class 1: 8.27041e-10 kg
- nitrogen, liquid: 6.51222e-5 kg
- non-sulfidic tailing, off-site: -0.000298055 kg
- oxygen, liquid: 0.00158129 kg
- petrol, unleaded, burned in machinery: 3.33016e-9 MJ
- petroleum coke: 2.05715e-6 kg
- pig iron: 0.0167105 kg
- pitch: 1.14331e-6 kg
- propane: 1.77443e-8 kg
- quicklime, in pieces, loose: 0.000913094 kg
- recultivation, ilmenite mine: 2.43029e-9 m2
- refractory, fireclay, packed: 5.94875e-6 kg
- sponge iron: 1.10581e-6, 2.64615e-9 kg (2 suppliers, which the file names only by identifier); sum of these 1.10845e-6 kg
- steam, in chemical industry: 0.000110146 kg
- transport, freight, lorry, unspecified: 1.27999e-6 metric ton*km
- wastewater from pig iron production: -2.82476e-5 m3
- wastewater, average: -1.00724e-10, -2.82902e-8 m3 (2 suppliers, which the file names only by identifier); sum of these -2.8391e-8 m3

## Inputs from nature
- Gangue [natural resource, in ground]: 0.000244837 kg
- Iron [natural resource, in ground]: 9.3991e-5 kg
- Occupation, mineral extraction site [natural resource, land]: 7.29087e-8 m2*year
- Oxygen [natural resource, in air]: 0.000543063 kg
- Titanium [natural resource, in ground]: 1.666e-5 kg
- Transformation, from forest, unspecified [natural resource, land]: 2.43029e-9 m2
- Transformation, to mineral extraction site [natural resource, land]: 2.43029e-9 m2
- Water, cooling, unspecified natural origin [natural resource, in water]: 0.000114741 m3
- Water, unspecified natural origin [natural resource, in ground]: 2.00381e-6 m3
- Water, unspecified natural origin [natural resource, in water]: 1.8073e-6 m3

## Emissions to nature
- Arsenic ion [air, unspecified]: 1.37797e-11 kg
- Benzo(a)pyrene [air, unspecified]: 9.35713e-12 kg
- Cadmium II [air, unspecified]: 3.41695e-11 kg
- Carbon dioxide, fossil [air, unspecified]: 0.00598936 kg
- Carbon monoxide, fossil [air, non-urban air or from high stacks]: 6.4587e-6 kg
- Carbon monoxide, fossil [air, unspecified]: 0.00012138 kg
- Chromium III [air, unspecified]: 6.26619e-10 kg
- Copper ion [air, unspecified]: 2.83474e-9 kg
- Dioxins, measured as 2,3,7,8-tetrachlorodibenzo-p-dioxin [air, unspecified]: 8.35997e-15 kg
- Heat, waste [air, unspecified]: 0.00395505 MJ
- Hydrochloric acid [air, unspecified]: 1.58226e-7 kg
- Hydrogen fluoride [air, unspecified]: 8.3187e-9 kg
- Hydrogen sulfide [air, unspecified]: 4.87081e-8 kg
- Iron ion [air, unspecified]: 7.95082e-7 kg
- Lead II [air, unspecified]: 9.96547e-9 kg
- Manganese II [air, unspecified]: 1.37522e-8 kg
- Mercury II [air, unspecified]: 2.0898e-11 kg
- Methane, fossil [air, unspecified]: 5.55834e-7 kg
- NMVOC, non-methane volatile organic compounds [air, unspecified]: 9.0866e-8 kg
- Nickel II [air, unspecified]: 1.41733e-10 kg
- Nitrogen oxides [air, unspecified]: 3.3357e-6 kg
- PAH, polycyclic aromatic hydrocarbons [air, unspecified]: 2.43183e-10 kg
- Particulate Matter, < 2.5 um [air, non-urban air or from high stacks]: 5.19997e-10 kg
- Particulate Matter, < 2.5 um [air, unspecified]: 1.54782e-6 kg
- Particulate Matter, > 10 um [air, non-urban air or from high stacks]: 7.07574e-9 kg
- Particulate Matter, > 10 um [air, unspecified]: 4.37968e-7 kg
- Particulate Matter, > 2.5 um and < 10um [air, non-urban air or from high stacks]: 2.80427e-9 kg
- Particulate Matter, > 2.5 um and < 10um [air, unspecified]: 9.72723e-8 kg
- Polychlorinated biphenyls [air, unspecified]: 3.03327e-13 kg
- Selenium IV [air, unspecified]: 2.35418e-10 kg
- Sulfur dioxide [air, unspecified]: 2.72779e-6 kg
- Titanium ion [air, unspecified]: 3.02247e-11 kg
- Vanadium V [air, unspecified]: 4.47929e-11 kg
- Water [air, non-urban air or from high stacks]: 5.20515e-8 m3
- Water [air, unspecified]: 0.000120076 m3
- Water [water, unspecified]: 2.88591e-6 m3
