# electricity voltage transformation from high to medium voltage

Dataset: EcoSpold 2, unit process
Geography: PE
Time period: 2012-01-01 to 2022-12-31
Technology level: current
Classification: ISIC rev.4 ecoinvent: 3510:Electric power generation, transmission and distribution
Scenario: Business-as-Usual
System model: Allocation at the point of substitution
Generated by: Alfredo Pro Castaneyra
Published in: Suppen, N 2017
Database: ecoinvent
isCopyrightProtected: true

## General comment
This dataset represents the transformation of electricity voltage from high to medium voltage. The losses are valid for the year 2018, based on electricity generation and trade statistics: IEA World Energy Statistics and Balances, ISSN: 16834240, https://doi.org/10.1787/enestats-data-en
Definition of the voltage levels:
- High voltage level above 24 kV (large scale industry)
- Medium voltage level between 1 kV and 24 kV (medium to small scale industry, service sector
and public buildings)
- Low voltage level below 1 kV (Households)

## Included activities start
This activity starts with the high voltage electricity arriving at the transformer station.

## Included activities end
This activity ends with 1kWh of high voltage electricity transformed to medium voltage.

This dataset includes the losses during voltage transformation.

It doesn't include the transformer station itself as this is included in the dataset for the transmission network.

## Geography
Data for the peruvian context in year 2014 was used.

## Technology
Transformers are essential components of the electricity grid. They connect the different voltage levels.
Big power plants feed the electricity at a very high voltage to the electricity grid. Transformers between 600 MVA and 80 MVA can be found in substations, where the high transmission voltage is transformed to the medium distribution voltage. In an additional step the medium voltage is transformed to low voltage using transformers below 2.5 MVA. The small transformers below 2.5 MVA are allocated to the low voltage level, whereas all the other transformers are allocated to the medium voltage level.

## Time period
Data for year 2014 was used.

## Parameters
- Above and below ground biomass: 0 dimensionless
- electricity transformation losses: 0 dimensionless
- electricity transmission losses: 0 dimensionless; name electricity_transmission_losses
  Losses of electricity during transmission in a certain voltage grid.
- total electricity losses within the country: 0 dimensionless

## Reference product
- electricity, medium voltage: 1 kWh; By-product classification allocatable product; CPC 17100: Electrical energy
  production volume 4.69647e10 kWh
    Literature value/ calculated value.
    Production volume which goes to medium voltage level (kWh)
    Calculation details:
    Absolute amount of electricity arriving at the MV level after transformation (39440 GWh)= Amount of electricity available at HV (41176 GWh) - Use of electricity at HV (1608 GWh) - Absolute losses, Transformation HV-MV (127 GWh)
    Absolute losses, Transformation HV-MV = Total transmission losses (1590 GWh)* transformation losses at Medium voltage level (1kV - 24 kV) (8%)
    Use of electricity at HV (GWh)= [Total electricity supply (41796 GWh)- Total transmission losses (1590GWh)]* Fraction of total consumption at HV level (4%)
    Amount of electricity available at HV (GWh)= Total electricity supply (41796 GWh)- Absolute losses on HV, transmission and transformation within HV grid (620 GWh)
    Absolute losses on HV, transmission and transformation within HV grid (620 GWh)= Total transmission losses (1590 GWh)* percentage of total losses on HV level (39%)
  property price 0.1 EUR2005
    Calculated to be between the price of electricity, high voltage and electricity, low voltage.
  properties: carbon allocation 0 kg, carbon content 0

## Inputs from technosphere
- electricity, high voltage: 1.00965 kWh
  Calculated value/estimation. This value compensates for the losses during transmission/distribution on this electricity market. The calculation is made based on total electricity losses between net electricity available at the busbar and the use of electricity calculated based on data from (COES, 2014) .
  Total electricity supply: 41796 GWh
  Total demand: 40206 GWh (estimated= total electricity supply - total transmission losses)
  Total transmission losses: 1590 GWh
  These total losses over the whole chain are then allocated to the different voltage levels as well as transformation and transmission losses based on generic data taken from the City of Zürich in 2009.
  Voltage level (definitions taken from Itten et al. 2014).
  High voltage level (>24 kV)
  Fraction of total consumption at high voltage level (generic, data taken from Switzerland): 4%.
  Total losses on high voltage level (generic, data taken from the City of Zürich in 2009): 39%
  Of which: Transmission: 33%
  Of which: Transformation: 6%
  Medium voltage level (1kV - 24 kV)
  Fraction of total consumption at medium voltage level (generic, data taken from Switzerland): 32%.
  Total losses on medium voltage level (generic, data taken from the City of Zürich in 2009): 13%
  Of which: Transmission: 5%
  Of which: Transformation: 8%
  Low voltage level (>1kV)
  Fraction of total consumption at low voltage level (generic, data taken from Switzerland): 64%.
  Total losses on medium voltage level (generic, data taken from the City of Zürich in 2009): 48%
  Of which: Transmission: 24%
  Of which: Transformation: 24%
  Calculation details:
  Transformation losses on medium voltage level are assumed to be the total transformation losses from high to medium voltage.
  Percentage of electricity lost due to transformation HV to MV, referring to the amount which could potentially arrive at MV after transformation (0,32%) = Absolute losses, Transformation HV-MV (127 GWh) / Amount of electricity leaving the HV level = amount of electricity which has to be transformed HV to MV (39568 GWh)
  Sources:
  COES, 2014. Sub Dirección de Gestión de la Información. RA-SGI-0115. ESTADISTICA RELEVANTE DEL SISTEMA ELÉCTRICO INTERCONECTADO NACIONAL, (2014). Cap. 06 PRODUCCIÓN TERMOELÉCTRICA Y CONSUMO DE COMBUSTIBLE. Retrieved online from http://www.coes.org.pe/Portal/Publicaciones/Estadisticas/ 2014/PDF/11_OPERACION DEL SISTEMA DE TRANSMISION, CUADRO N° 11.3 PÉRDIDAS EN EL SISTEMA DE TRANSMISIÓN (page 7). August, 22 2017 MINEM, 2015. Anuario Ejecutivo de Electricidad 2014, page 52. Retrieved online from http://www.minem.gob.pe/minem/archivos/Anuario%20Ejecutivo%20de%20Electricidad-Final.pdf, August 22 2017.
  Itten R., Frischknecht R., Stucki M. 2014. Life Cycle Inventories of Electricity Mixes and Grid. Version 1.3. treeze, Uster, Switzerland

## Sampling procedure
Data on the total electricity production (41796 GWh) and total transmission losses (1590 GWh) were obtained from (COES, 2014 and MINEM, 2015).

COES, 2014. Sub Dirección de Gestión de la Información. RA-SGI-0115. ESTADISTICA RELEVANTE DEL SISTEMA ELÉCTRICO INTERCONECTADO NACIONAL, (2014). Cap. 06 PRODUCCIÓN TERMOELÉCTRICA Y CONSUMO DE COMBUSTIBLE. Retrieved online from http://www.coes.org.pe/Portal/Publicaciones/Estadisticas/ 2014/PDF/11_OPERACION DEL SISTEMA DE TRANSMISION, CUADRO N° 11.3 PÉRDIDAS EN EL SISTEMA DE TRANSMISIÓN (page 7). August, 22 2017

## Extrapolations
The share of the total losses was allocated to the different voltage levels based on generic data from Switzerland in 2009 ( Itten R., Frischknecht R., Stucki M. 2014).
High voltage level (>24 kV)
Fraction of total consumption at high voltage level (generic, data taken from Switzerland): 4%.
Total losses on high voltage level (generic, data taken from the City of Zürich in 2009): 39%
Of which: Transmission: 33%
Of which: Transformation: 6%

Medium voltage level (1kV - 24 kV)
Fraction of total consumption at medium voltage level (generic, data taken from Switzerland): 32%.
Total losses on medium voltage level (generic, data taken from the City of Zürich in 2009): 13%
Of which: Transmission: 5%
Of which: Transformation: 8%

Low voltage level (>1kV)
Fraction of total consumption at low voltage level (generic, data taken from Switzerland): 64%.
Total losses on medium voltage level (generic, data taken from the City of Zürich in 2009): 48%
Of which: Transmission: 24%
Of which: Transformation: 24%
Sources:
COES, 2014. Sub Dirección de Gestión de la Información. RA-SGI-0115. ESTADISTICA RELEVANTE DEL SISTEMA ELÉCTRICO INTERCONECTADO NACIONAL, (2014). Cap. 06 PRODUCCIÓN TERMOELÉCTRICA Y CONSUMO DE COMBUSTIBLE. Retrieved online from http://www.coes.org.pe/Portal/Publicaciones/Estadisticas/ 2014/PDF/11_OPERACION DEL SISTEMA DE TRANSMISION, CUADRO N° 11.3 PÉRDIDAS EN EL SISTEMA DE TRANSMISIÓN (page 7). August, 22 2017
Itten R., Frischknecht R., Stucki M. 2014. Life Cycle Inventories of Electricity Mixes and Grid. Version 1.3. treeze, Uster, Switzerland

## Review by Christopher Oberschelp 2018-01-16
Dataset content and documentation seems good now. Individual deviations on exchanges may still be spotted by comparison with reference datasets.
