# Distiller's Dried Grains with Solubles to generic market for protein feed

Dataset: EcoSpold 2, unit process
Geography: GLO
Time period: 2012-01-01 to 2022-12-31
Technology level: current
Classification: ISIC rev.4 ecoinvent: 2011:Manufacture of basic chemicals
Scenario: Business-as-Usual
System model: Allocation at the point of substitution
Generated by: Tereza Levova
Database: ecoinvent
isCopyrightProtected: true

## General comment
This is a linking activity that converts distiller's dried grains into protein, 100% crude for the feed market and gross energy for the feed market.
The naming of the dataset is based on the feed nomenclature system of the National Research Council (USA). Products with less than 20 percent of protein are classified as energy feeds. Products with more than 20 percent of protein are classified as protein feeds.

## Included activities start
The activity starts with the reception of distiller's dried grains with solubles

## Included activities end
The activity ends with the conversion of distiller's dried grains with solubles into crude protein and gross energy.

## Reference product
- protein feed, 100% crude: 1 kg; name protein_output; By-product classification allocatable product; CPC 23319: Preparations used in animal feeding n.e.c.
  Calculated based on crude protein content of DDGS (0.38 kg/kg dry mass).
  production volume 6.06632e9 kg
    Calculated from production volume of reference product using the relative outputs.
  property carbon content, non-fossil 0.53
    considered pure protein (ecoinvent v2.2 report 17, pg 288). C-content in protein is estimated to be 53% ( from "Evolutionary and Biochemical Aspects", A.D. Kay and T. Vrede (in Global Ecology, 2010, Elsevier B.V., S.E. Jørgensen Ed.).
  property price 0.424 EUR2005
    Based on protein content and energy feed, gross content in soybean meal and prices per kg of soybean meal. Assumed soybean meal is the most used feed. Soybean meal 2004 prices for World import/export data (tonnes and US$) from FaoStat statistics (http://faostat.fao.org/site/535/default.aspx#ancor, TRADE)- [Accessed 24 May 2010]. See calculations for protein /energy content
  properties: carbon allocation 0.53 kg, carbon content 0.53, carbon content, fossil 0, dry mass 1 kg, water content 0, water in wet mass 0 kg, wet mass 1 kg

## Inputs from technosphere
- Distiller's Dried Grains with Solubles: -0.637926 kg
- ammonium sulfate: 0.000224812, 0.00572221 kg (2 suppliers, which the file names only by identifier); sum of these 0.00594703 kg
- electricity, medium voltage: 0.000274903, 0.00281039, 0.00100601, 0.204751, 0.00626607, 8.36934e-5, 0.000427038, 0.000122344, 0.0257856, 0.00189121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 kWh (11 suppliers, which the file names only by identifier); sum of these 0.244829 kWh
- ethanol fermentation plant: 3.06821e-10 unit
- heat, district or industrial, natural gas: 0.00701302, 1.34584, 0.00837144, 7.1933, 0.000602076 MJ (5 suppliers, which the file names only by identifier); sum of these 8.55513 MJ
- inorganic nitrogen fertiliser, as N: 8.63617e-5, 3.31588e-9, 8.13384e-6, 9.20556e-10, 2.22902e-5, 9.87957e-7, 2.85842e-8, 1.52643e-8, 2.01583e-9, 6.43168e-8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 kg (64 suppliers, which the file names only by identifier); sum of these 0.00594703 kg
- maize grain: 0.0184965, 0.000590681, 1.95651 kg (3 suppliers, which the file names only by identifier); sum of these 1.9756 kg
- potato: 0.0241036 kg
- rye grain: 0.00511288 kg
- soda ash, light: 0.022217 kg
- sulfuric acid: 0.0145122, 0.00028226 kg (2 suppliers, which the file names only by identifier); sum of these 0.0147944 kg
- tap water: 1.00352e-5, 0.409466, 0.000418203, 1.65848e-5, 0.00211605, 3.09464e-5, 2.18217, 1.08795e-5, 0.000713111, 8.33674e-5 kg (10 suppliers, which the file names only by identifier); sum of these 2.59503 kg
- transport, tractor and trailer, agricultural: 0.0200186, 2.95676e-5 metric ton*km (2 suppliers, which the file names only by identifier); sum of these 0.0200481 metric ton*km
- wastewater, average: -1.41361e-6, -8.80371e-7, -0.00176871, -5.98643e-5 m3 (4 suppliers, which the file names only by identifier); sum of these -0.00183087 m3

## Inputs from nature
- Carbon dioxide, in air [natural resource, in air]: 0.918232 kg
- Water, cooling, unspecified natural origin [natural resource, in water]: 0.00267866 m3

## Emissions to nature
- Carbon dioxide, non-fossil [air, urban air close to ground]: 1.53792 kg
- Water [air, unspecified]: 0.0017668 m3
- Water [water, unspecified]: 0.0016937 m3

## Sampling procedure
inventory based on gross energy and protein composition of raw material. Data obtained from Agroscope database of feedstuff compositions.

## Review by Bo Weidema 2012-03-14
Production volumes are for 2005, even though the dataset is indicated to be valid for 2012.
