# treatment of waste wood, post-consumer, sorting and shredding

Dataset: EcoSpold 2, unit process
Geography: CH
Time period: 2004-01-01 to 2022-12-31
Technology level: current
Classification: ISIC rev.4 ecoinvent: 3830:Materials recovery
Tags: Swiss brush-up completed; ConvertedDataset
Scenario: Business-as-Usual
System model: Allocation at the point of substitution
Share of production covered: 1 %
Generated by: Frank Werner
Published in: Jungbluth N. 2007
Database: ecoinvent
isCopyrightProtected: true

## General comment
The distribution of wood qualities between hard and soft wood is 28% hard wood and 72% soft wood. The volume refers to the bulked volume. The bulk density of wood chips is 239 and 169 kg/m3 of dry mass, for hard and soft wood respectively (i.e.188.6 kg/m3 of dry mass overall). Lower heating value = 3640 MJ/m3. Waste wood does not go through a specific treatment process.
[This dataset was already contained in the ecoinvent database version 2. It was not individually updated during the transfer to ecoinvent version 3. Life Cycle Impact Assessment results may still have changed, as they are affected by changes in the supply chain, i.e. in other datasets. This dataset was generated following the ecoinvent quality guidelines for version 2. It may have been subject to central changes described in the ecoinvent version 3 change report (http://www.ecoinvent.org/database/ecoinvent-version-3/reports-of-changes/), and the results of the central updates were reviewed extensively. The changes added e.g. consistent water flows and other information throughout the database. The documentation of this dataset can be found in the ecoinvent reports of version 2, which are still available via the ecoinvent website. The change report linked above covers all central changes that were made during the conversion process.]

## Included activities end
This process includes transport of waste urban and demolition wood to the chopping facility (50 km), infrastructure, chopping of the wood into chips in the sawmill, consumption of water and disposal of effluents and wastes from sorting. Includes also the carbon dioxide credit. No specific treatment of the wood is considered. The gross calorific value of the biomass is not included as the product comes from waste.

## Geography
Data for Austria (process) and Switzerland (mix) used for central Europe

## Technology
Chopping of industrial residual wood in stationary electric chopper.

## Parameters
- fraction, process water, to air: 0 dimensionless; name fraction_PW_to_air
  Calculated based on input/output values.
- fraction, tap water, to air: 0 dimensionless; name fraction_TW_to_air; = fraction_PW_to_air
  Calculated value. See comment in the other parametres present in this dataset. Tap water is considered to be always used as process water, thus process water fractions to air are applied to all tap water input flows to calculate the amount of water consumed in the processes.

## Reference product
- wood chips, from post-consumer wood, measured as dry mass: 1 kg; name wood_chips_ByP; By-product classification allocatable product; CPC 3928: Sawdust and wood waste and scrap; lognormal variance with pedigree 0.0256, pedigree (2,1,1,1,1)
  production volume 200000 kg
    Production of waste urban and demolition wood in CH in 2003 is 0.2 million m3.
    year 2003 values
    Calculated from the production volume of waste wood, 40% water on dry mass basis in proportion to the respective output amounts.
  property carbon content, non-fossil 0.494
    C content of dry mass is 0.494 kgC/kg dry wood (ecoinvent v2.2 report 6_IX & ecoinvent v2.2 report 9).
  property heating value, net 9.99 MJ
    LHV is calculated based on the Carbon content of the product. More details can be found on the respective documentation.
  property price 0.107 EUR2005
    Expert judgement (Urs Luginbühl, Swiss Sawmilling industry, personal communication in June 2014). Wood chips from softwood should have a price of 0.101 EUR/kg. Woodchips from hardwood should have a price of 0.112 EUR/kg. Average of these two values is used. Cross-reference; FAOSTAT database; http://faostat.fao.org/site/626/DesktopDefault.aspx?PageID=626#ancor; Average import/export prices of EU for 'chips and particles'. Price: 48.76 Euro/m3. The density of the wood chips is 650 kg/m3. The price is recalculated accordingly.
  properties: carbon allocation 0.494 kg, carbon content 0.494, carbon content, fossil 0, dry mass 1 kg, water content 0.4, water in wet mass 0.4 kg, wet mass 1.4 kg

## Inputs from technosphere
- agricultural trailer: 5.78024e-8 kg
- aluminium, cast alloy: 0.000166659 kg
- building, hall: 9.82741e-9 m2
- cast iron: 0.000166659 kg
- chemical, organic: 3.69549e-5 kg
- chromium steel pipe: 1.47856e-6 kg
- corrugated board box: 9.68073e-6, 2.247e-5, 8.79123e-6, 3.60608e-7 kg (4 suppliers, which the file names only by identifier); sum of these 4.13025e-5 kg
- diesel, burned in agricultural machinery: 3.69286e-5 MJ
- diesel, burned in diesel-electric generating set, 18.5kW: 9.28981e-5 MJ
- electricity, medium voltage: 0.00137385 kWh
- extrusion of plastic sheets and thermoforming, inline: 6.08669e-5 kg
- glued laminated timber, average glue mix: 2.68638e-7, 5.83263e-7 m3 (2 suppliers, which the file names only by identifier); sum of these 8.51902e-7 m3
- heat, district or industrial, natural gas: 0.00194991 MJ
- heat, district or industrial, other than natural gas: 5.36838e-6, 0.00151515 MJ (2 suppliers, which the file names only by identifier); sum of these 0.00152052 MJ
- lubricating oil: 7.95139e-5, 1.67499e-5 kg (2 suppliers, which the file names only by identifier); sum of these 9.62638e-5 kg
- medium density fibreboard: 5.57054e-8, 3.56763e-7 m3 (2 suppliers, which the file names only by identifier); sum of these 4.12468e-7 m3
- metal working, average for chromium steel product manufacturing: 1.47856e-6 kg
- metal working, average for steel product manufacturing: 0.000443501 kg
- particleboard, uncoated: 1.12058e-6, 5.41355e-7 m3 (2 suppliers, which the file names only by identifier); sum of these 1.66193e-6 m3
- plywood: 2.12083e-8, 4.49984e-7 m3 (2 suppliers, which the file names only by identifier); sum of these 4.71193e-7 m3
- polyethylene terephthalate, granulate, amorphous: 1.30429e-5 kg
- polypropylene, granulate: 4.7824e-5 kg
- residual softwood, wet: 8.14299e-10 m3
- sawlog and veneer log, softwood, measured as solid wood under bark: 1.1541e-8 m3
- sawnwood, hardwood, dried (u=10%), planed: 2.37859e-8, 9.65741e-9 m3 (2 suppliers, which the file names only by identifier); sum of these 3.34433e-8 m3
- scrap aluminium: -5.28656e-5, -2.48033e-6, -0.000111313 kg (3 suppliers, which the file names only by identifier); sum of these -0.000166659 kg
- scrap steel: -7.63631e-8, -0.000187182, -6.02725e-5 kg (3 suppliers, which the file names only by identifier); sum of these -0.000247531 kg
- shed, large, wood, non-insulated, fire-unprotected: 2.1867e-10 m2
- steel in car shredder residue: -5.12998e-7 kg
- steel, low-alloyed: 5.12998e-7 kg
- steel, low-alloyed, hot rolled: 0.00061016 kg
- synthetic rubber: 1.88075e-5 kg
- tap water: 0.016663 kg
- tractor, 4-wheel, agricultural: 7.01159e-8 kg
- used intermodal shipping container, 20-foot: -6.13358e-8 unit
- used intermodal shipping container, 40-foot: -2.94384e-8 unit
- used intermodal shipping container, 40-foot, high-cube: -4.03695e-8 unit
- used intermodal shipping container, 45-foot, high-cube: -6.05415e-9 unit
- waste mineral oil: -5.88728e-7, -6.22675e-5, -2.37812e-5 kg (3 suppliers, which the file names only by identifier); sum of these -8.66374e-5 kg
- waste paperboard: -2.75374e-7, -1.79603e-7, -3.34994e-5, -1.80331e-6, -4.42869e-6, -9.70248e-8, -9.95041e-7, -2.40789e-8 kg (8 suppliers, which the file names only by identifier); sum of these -4.13025e-5 kg
- waste polyethylene/polypropylene product: -4.32818e-5, -1.70728e-5, -5.1231e-7 kg (3 suppliers, which the file names only by identifier); sum of these -6.08669e-5 kg
- waste rubber, unspecified: -3.70789e-7, -8.83256e-6, -8.83256e-6 kg (3 suppliers, which the file names only by identifier); sum of these -1.80359e-5 kg
- waste wood, post-consumer: -0.000893262, -0.000898097 kg (2 suppliers, which the file names only by identifier); sum of these -0.00179136 kg
- wastewater, unpolluted: -6.81636e-8, -1.40954e-5 m3 (2 suppliers, which the file names only by identifier); sum of these -1.41636e-5 m3
- welding, arc, steel: 8.1052e-6 m
- wood preservation, pressure vessel, creosote, outdoor use, ground contact: 1.142e-6 kg
- wooden board factory, organic bonded boards: 1.11995e-13 unit
- zinc coat, pieces: 4.58582e-5 m2

## Emissions to nature
- Heat, waste [air, non-urban air or from high stacks]: 1.54441e-7 MJ
- Water [air, unspecified]: 2.49945e-6 m3
- Oils, unspecified [soil, unspecified]: 9.62638e-6 kg

## Sampling procedure
Federal office of statistics (CH) and IEA task 33 country reports.
