# treatment of biowaste by anaerobic digestion

Dataset: EcoSpold 2, unit process
Geography: RoW
Time period: 2011-01-01 to 2022-12-31
Technology level: current
Classification: ISIC rev.4 ecoinvent: 3821:Treatment and disposal of non-hazardous waste
Scenario: Business-as-Usual
System model: Allocation at the point of substitution
Generated by: Mischa Zschokke-Gohl
Published in: Kaegi Thomas 2019
Database: ecoinvent
isCopyrightProtected: true

## General comment
Biowaste in the current process is defined as follows:

Biodegradable garden and park waste, food and kitchen waste from households, restaurants, caterers and retail premises, comparable waste from food processing plants, it also includes forestry or agricultural residues and manure. It does not include sewage sludge, or other biodegradable waste such as natural textiles, paper or processed wood.
The anaerobic digestion treatment is a collection of processes by which microorganisms break down biodegradable material in the absence of oxygen. The treatment process produces biogas (a mixture of mainly methane and carbon dioxide) and residual products called solid and liquid digestate.
The relevant resulting emissions to air from the treatment process are summarised in the following table:
The resulting outputs biogas, "digestate, solid" and "digestate, liquid" refer to 1 kg fresh weight of biogenic waste.
The contents of digestate are as follows:
The heavy metal contents of digestate are presented in the following tables:
Previous studies in the corresponding field showed that the evaluation of heavy metal emissions into soil with various single score methods such as Eco-Indicator 99 and ecological scarcity have a significant impact on the overall results. It is therefore advised to take special care when evaluating these systems, especially to avoid potential double counting.
The output digestate uses a special property "humus equivalents" which depicts the amount of organic carbon, which would lead to a buildup of humus.
Different substrates have different capacities of organic matter to form humus (see following figure)
The proposed method to account for humus C is based on the following methodology:
The organic carbon content of soil (Corg) is normally used to declare the amount of organic matter of soil. The content of humus is calculated from Corg, using the assumption that humus contains 58% carbon on average.
The amount of humus is therefore calculated out of Corg as follows:
humus content [%] or [mg g-1] = (Ctotal - Cinorg) / 0.58
If an allocation approach with substution is applied, the corresponding amounts of substitutes are calculated based on their capacity to build up humus. The conversion is based on the humus factors, which are listed in the next table:

More detailed descriptions and background information can be found in the corresponding report.

## Included activities start
The process described starts at the treatment site, after delivery of the materials for treatment.

## Included activities end
Energy demand for operating a anaerobic treatment plant was included as well as process emissions and the needed infrastructure of the plant.

## Geography
Values refer to the situation in Switzerland.

## Technology
Included processes: Infrastructure for the pre-treatment process, digestion of bio-waste and the succsesive treatment of the fermented material (de-watering and post composting). Remark: Infrastructure expenditures are recorded for a plant with a yearly capacity of 10"000t and a lifetime of 25 years. For stationary machines a lifetime of 10 years is assumed. As a first approximation, the machines are taken into account as cast iron.; Geography: Data represents a Swiss plant. Technology: Thermophile, single stage digestion with post composting.
The process step-by-step, from shredding to products:
1. Reception and weighing (+ storage of feedstock)
2. Shredding (depending on structure of feedstock)
3. Anaerobic digestion (AD) and solid/liquid separation
4. Rotting process, turning over, aeration and watering
5. Post-processing and conditioning

## Parameters
- fraction_digestate_liquid: 0.3 dimensionless
  Denotes the fraction of liquid digestate, resulting from anaerobic digesting 1 kg of biowaste.
- fraction_digestate_solid: 0.32 dimensionless
  Denotes the fraction of solid digestate, resulting from anaerobic digesting 1 kg of biowaste.

## Reference product
- biogas: 1 m3; name biogas_yield; = ABS( Mass_biowaste)*0.1; source Raboni, Massimo 2014; By-product classification allocatable product; CPC 17200: Coal gas, water gas, producer gas and similar gases, other than petroleum gases and other gaseous hydrocarbons; CAS 14493-06-2; lognormal variance with pedigree 0.0166, pedigree (3,4,1,5,2)
  An average yield of 100 litres of biogas per kg biowaste is assumed
  production volume 5.53425e9 m3
    Production volume amount was scaled from the respective Swiss value. GDP scaling was employed with Switzerland accounting for roughly 0.8% of the global GDP, yielding a global production volume of 557888532 m3. Production volume comment for Switzerland: According to the Swiss ministry of Environment, in 2016 in Switzerland, 947 TJ of energy produced from anaerobic digestion dedicated to the treatment of Biowaste. Values aexpressed in gross energy production. Assuming a calorific value of 21 MJ per Nm3 of biogas, the production volume is calculated to be 44631083 m3 of biogass. Source: Kaufmann, U. (2017). Schweizerische Statistik der erneuerbaren Energien. Ausgabe 2016, 75. Retrieved from http://www.bfe.admin.ch/php/modules/publikationen/stream.php?extlang=de&name=de_729286095.pdf&endung=Schweizerische
  property carbon content, non-fossil 0.449939
    Total C content in kg/Nm3 (Tab 12.8, ecoinvent v2.2 report n17), referred to 1kg DM
  property heating value, net 22.73 MJ
    Value taken from the general comment of "heat and power co-generation, biogas, gas engine" dataset.
  property price 0.109 EUR2005
    Temporary price data. Calculated as 90% of purchasers price based on: Same prices per energy output as natural gas, based on the proportional lower heating value (2/3 that of natural gas)
  properties: carbon allocation 0.51743 kg, carbon content 0.449939, carbon content, fossil 0, dry mass 1.15 kg, water content 0, water in wet mass 0 kg, wet mass 1.15 kg

## Inputs from technosphere
- EUR-flat pallet: 9.64537e-5, 4.38426e-5 unit (2 suppliers, which the file names only by identifier); sum of these 0.000140296 unit
- [thio]carbamate-compound: 1.81577e-6 kg
- activated bentonite: 1.2692e-5 kg
- alkylbenzene sulfonate, linear, petrochemical: 1.03259e-8 kg
- aluminium sulfate, powder: 3.31653e-6 kg
- ammonium nitrate: 0.000104039, 0.000150012, 8.73735e-5, 0.0010496 kg (4 suppliers, which the file names only by identifier); sum of these 0.00139103 kg
- ammonium sulfate: 2.73457e-6, 2.41189e-5 kg (2 suppliers, which the file names only by identifier); sum of these 2.68534e-5 kg
- application of plant protection product, by field sprayer: 3.45864e-6, 9.85057e-7 ha (2 suppliers, which the file names only by identifier); sum of these 4.4437e-6 ha
- benzimidazole-compound: 7.19863e-8 kg
- biowaste: -0.0917235, -0.000543644 kg (2 suppliers, which the file names only by identifier); sum of these -0.0922671 kg
- bipyridylium-compound: 3.81484e-6 kg
- boric acid, anhydrous, powder: 1.8982e-5 kg
- building, hall: 6.64958e-6 m2
- calcium chloride: 2.87897e-9, 1.01932e-8 kg (2 suppliers, which the file names only by identifier); sum of these 1.30721e-8 kg
- chemical, inorganic: 1.00577e-5 kg
- chemical, organic: 4.92648e-6 kg
- chlorine dioxide: 7.0117e-6, 1.44674e-6 kg (2 suppliers, which the file names only by identifier); sum of these 8.45843e-6 kg
- cocoons: 7.90901e-6, 0.000106697 kg (2 suppliers, which the file names only by identifier); sum of these 0.000114606 kg
- compost: 0.0110396 kg
- conveyor belt: 3.34717e-8 m
- copper oxide: 1.17707e-5 kg
- cottonseed: 0.0110505, 0.0499046, 7.74519e-5 kg (3 suppliers, which the file names only by identifier); sum of these 0.0610325 kg
- cyclic N-compound: 7.63658e-6 kg
- diesel, burned in agricultural machinery: 0.0148854 MJ
- diesel, burned in building machine: 0.000135569 MJ
- dust collector, electrostatic precipitator, for industrial use: 4.34022e-12 unit
- electricity, low voltage: 1.35264e-6, 1.16898e-5, 3.67241e-7, 1.32319e-6, 1.22197e-6, 5.45258e-8, 3.80613e-7, 1.04286e-5, 1.64537e-6, 5.52698e-6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 kWh (103 suppliers, which the file names only by identifier); sum of these 0.0201351 kWh
- electricity, medium voltage: 2.39206e-6, 3.22989e-6, 4.64519e-6, 9.69649e-7, 5.67955e-5, 0.000621681, 3.06742e-6, 5.16466e-9, 1.14865e-6, 1.4495e-5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 kWh (74 suppliers, which the file names only by identifier); sum of these 0.00333768 kWh
- enzymes: 4.25668e-7 kg
- establishing orchard: 0.00184821 unit
- ethanol, without water, in 99.7% solution state, from ethylene: 6.5257e-10, 1.4895e-9 kg (2 suppliers, which the file names only by identifier); sum of these 2.14207e-9 kg
- fertilising, by broadcaster: 6.56705e-7, 2.43374e-6 ha (2 suppliers, which the file names only by identifier); sum of these 3.09044e-6 ha
- fodder loading, by self-loading trailer: 2.43432e-7 m3
- fruit tree seedling, for planting: 0.00184821 unit
- furnace, wood chips, softwood storage area, 1000kW: 2.16886e-11 unit
- furnace, wood chips, with silo, 1000kW: 5.44236e-11 unit
- furnace, wood chips, with silo, 5000kW: 9.16636e-11 unit
- glyphosate: 2.59947e-6 kg
- green manure, organic, until February: 1.19977e-7 ha
- gypsum, mineral: 0.000449749, 2.10892e-6, 9.46553e-7 kg (3 suppliers, which the file names only by identifier); sum of these 0.000452805 kg
- harvesting, by complete harvester, beets: 1.19977e-7 ha
- hazardous waste, for incineration: -6.79838e-7 kg
- heat, central or small-scale, other than natural gas: 0.0081693, 0.0252966, 0.0044811 MJ (3 suppliers, which the file names only by identifier); sum of these 0.037947 MJ
- heat, district or industrial, natural gas: 0.00313968, 0.00069415, 0.000536582 MJ (3 suppliers, which the file names only by identifier); sum of these 0.00437041 MJ
- heat, district or industrial, other than natural gas: 0.000365925, 4.01375e-5, 3.96107e-5, 3.38058e-5, 0.00725485, 0.0011331 MJ (6 suppliers, which the file names only by identifier); sum of these 0.00886743 MJ
- hexane: 5.94541e-6 kg
- hoeing: 2.39954e-7 ha
- industrial machine, heavy, unspecified: 2.40994e-9, 1.16018e-9 kg (2 suppliers, which the file names only by identifier); sum of these 3.57012e-9 kg
- inorganic nitrogen fertiliser, as N: 0.000313875, 2.71016e-10, 0.000119851, 7.52397e-11, 5.31244e-5, 4.82001e-7, 2.33627e-9, 1.2476e-9, 1.6476e-10, 5.2568e-9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 kg (62 suppliers, which the file names only by identifier); sum of these 0.00100669 kg
- inorganic phosphorus fertiliser, as P2O5: 0.000377006, 1.74705e-9, 7.32487e-10, 6.23696e-8, 2.1396e-6, 7.96181e-10, 7.00639e-11, 8.18929e-11, 1.88354e-10, 6.52658e-6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 kg (62 suppliers, which the file names only by identifier); sum of these 0.00136908 kg
- inorganic potassium fertiliser, as K2O: 2.85042e-6, 2.68404e-8, 7.69918e-5, 6.88953e-7, 1.43007e-5, 3.40465e-7, 7.7458e-8, 5.25139e-8, 1.98386e-7, 6.87057e-8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 kg (29 suppliers, which the file names only by identifier); sum of these 0.000207532 kg
- irrigation: 0.000156679, 1.05597e-5, 6.33459e-6, 1.58862e-7, 2.83125e-5, 3.89179e-5, 0.00083641, 0.000158152, 6.17694e-6, 0.000371207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 m3 (16 suppliers, which the file names only by identifier); sum of these 0.00564866 m3
- land use change, perennial crop: 1.9681e-7, 6.34526e-7, 8.78813e-7, 1.86616e-7 ha (4 suppliers, which the file names only by identifier); sum of these 1.89677e-6 ha
- lime: 0.000257942, 0.0057021 kg (2 suppliers, which the file names only by identifier); sum of these 0.00596004 kg
- liquefied petroleum gas: 2.22534e-6, 1.78437e-8, 1.13176e-8, 9.07054e-7, 2.6592e-8, 8.01689e-8, 3.79612e-6 kg (7 suppliers, which the file names only by identifier); sum of these 7.06443e-6 kg
- liquid manure spreading, by vacuum tanker: 1.57602e-6 m3
- lubricating oil: 1.01202e-6 kg
- mandarin: 0.274151 kg
- manganese(III) oxide: 8.16412e-6 kg
- mango: 0.00283452, 4.90384e-5 kg (2 suppliers, which the file names only by identifier); sum of these 0.00288356 kg
- manure, solid, cattle: 0.00231836 kg
- melamine formaldehyde resin: 2.37641e-5 kg
- methylene diphenyl diisocyanate: 4.28262e-6 kg
- mulberry leaves: 0.0350497 kg
- nickel, class 1: 1.50454e-7 kg
- nitrile-compound: 2.21723e-6 kg
- oil mill: 1.23298e-11 unit
- organophosphorus-compound, unspecified: 5.23405e-6 kg
- packaging, for fertilisers: 0.0269089 kg
- packaging, for pesticides: 0.000174899 kg
- paper, newsprint: 2.21074e-5, 6.67359e-5 kg (2 suppliers, which the file names only by identifier); sum of these 8.88433e-5 kg
- paraffin: 2.47896e-5 kg
- pesticide, unspecified: 3.75178e-8 kg
- petrol, unleaded, burned in machinery: 0.000720423 MJ
- phenolic resin: 2.68959e-5 kg
- phosphate rock, beneficiated: 1.89155e-6, 0.00071312, 5.55523e-6, 5.54545e-6 kg (4 suppliers, which the file names only by identifier); sum of these 0.000726112 kg
- phosphoric acid, industrial grade, without water, in 85% solution state: 1.14015e-5 kg
- planting tree: 0.00184821 unit
- polyethylene terephthalate, granulate, amorphous: 1.77198e-5 kg
- portafer: 3.02238e-6 kg
- potassium chloride: 0.00171659, 5.92609e-5 kg (2 suppliers, which the file names only by identifier); sum of these 0.00177585 kg
- potassium sulfate: 0.000146367, 0.000696133 kg (2 suppliers, which the file names only by identifier); sum of these 0.0008425 kg
- poultry manure, dried: 0.000931531 kg
- pulpwood, hardwood, measured as solid wood under bark: 8.88139e-7 m3
- pulpwood, softwood, measured as solid wood under bark: 3.62189e-6 m3
- rape oil, crude: 1.22026e-9, 1.7118e-6 kg (2 suppliers, which the file names only by identifier); sum of these 1.71302e-6 kg
- sawdust, wet, measured as dry mass: 1.63179e-6, 8.00016e-5 kg (2 suppliers, which the file names only by identifier); sum of these 8.16333e-5 kg
- slab and siding, softwood, wet, measured as dry mass: 3.46694e-5, 0.000134434 kg (2 suppliers, which the file names only by identifier); sum of these 0.000169103 kg
- sodium chloride, powder: 2.013e-8 kg
- sodium hydroxide, without water, in 50% solution state: 1.8965e-8 kg
- sodium metasilicate pentahydrate, 58% active substance, powder: 1.02939e-8, 2.13826e-8 kg (2 suppliers, which the file names only by identifier); sum of these 3.16765e-8 kg
- sodium percarbonate, powder: 1.19588e-8, 2.48409e-8 kg (2 suppliers, which the file names only by identifier); sum of these 3.67997e-8 kg
- solid manure loading and spreading, by hydraulic loader and spreader: 0.00432849 kg
- sowing: 1.19977e-7 ha
- soybean: 3.80862e-5, 5.26656e-5 kg (2 suppliers, which the file names only by identifier); sum of these 9.07518e-5 kg
- soybean, organic: 0.000336167 kg
- steam, in chemical industry: 0.000120767, 0.000684958 kg (2 suppliers, which the file names only by identifier); sum of these 0.000805725 kg
- sugar beet seed, for sowing: 2.51952e-7 kg
- sulfite: 4.10028e-6, 8.30255e-6 kg (2 suppliers, which the file names only by identifier); sum of these 1.24028e-5 kg
- tap water: 8.08036e-6, 0.00055247, 1.96987e-5, 0.0022697, 3.67567e-5, 0.00568425, 1.29221e-5, 9.90157e-5 kg (8 suppliers, which the file names only by identifier); sum of these 0.00868289 kg
- thermoforming of plastic sheets: 1.77198e-5 kg
- tillage, harrowing, by spring tine harrow: 2.39954e-7 ha
- tillage, ploughing: 1.19977e-7 ha
- transport, tractor and trailer, agricultural: 1.85037e-5, 1.63204e-8 metric ton*km (2 suppliers, which the file names only by identifier); sum of these 1.85201e-5 metric ton*km
- trellis system, wooden poles, soft wood, tar impregnated: 1.16009e-5 ha
- triazine-compound, unspecified: 2.42353e-7 kg
- urea: 0.000175277, 0.00330406, 0.000141437, 0.000956925 kg (4 suppliers, which the file names only by identifier); sum of these 0.0045777 kg
- urea formaldehyde resin: 7.14009e-5 kg
- vegetable oil, refined: 8.95568e-6 kg
- waste wood, untreated: -3.69408e-6, -3.38947e-5, -0.00167469, -0.00835853, -2.14399e-5, -0.000642212, -0.000523301, -0.000340246 kg (8 suppliers, which the file names only by identifier); sum of these -0.011598 kg
- wastewater from hard fibreboard production: -4.6991e-6 m3
- wastewater from medium density board production: -1.03206e-7 m3
- wastewater from particle board production: -9.44304e-8 m3
- wastewater from textile production: -1.8337e-6 m3
- wastewater from vegetable oil refinery: -1.46141e-8 m3
- wastewater, average: -6.69559e-9, -1.11418e-6, -2.66422e-7 m3 (3 suppliers, which the file names only by identifier); sum of these -1.38729e-6 m3
- wood ash mixture, pure: -6.78948e-6 kg
- wood chips, dry, measured as dry mass: 0.00079388 kg
- wood chips, from post-consumer wood, measured as dry mass: 0.000359055 kg
- wood chips, wet, measured as dry mass: 6.22694e-8, 2.74827e-5 kg (2 suppliers, which the file names only by identifier); sum of these 2.75449e-5 kg
- wooden board factory, organic bonded boards: 1.40602e-13 unit
- zinc monosulfate: 7.80991e-6, 1.4784e-6 kg (2 suppliers, which the file names only by identifier); sum of these 9.2883e-6 kg

## Inputs from nature
- Carbon dioxide, in air [natural resource, in air]: 0.0573626 kg
- Energy, gross calorific value, in biomass [natural resource, biotic]: 0.300289 MJ
- Occupation, annual crop, non-irrigated, intensive [natural resource, land]: 0.000706714 m2*year
- Occupation, industrial area [natural resource, land]: 6.11636e-9 m2*year
- Occupation, permanent crop, irrigated [natural resource, land]: 0.116322 m2*year
- Transformation, from annual crop, non-irrigated, intensive [natural resource, land]: 0.00119977 m2
- Transformation, from permanent crop, irrigated [natural resource, land]: 0.00580045 m2
- Transformation, to annual crop, non-irrigated, intensive [natural resource, land]: 0.00119977 m2
- Transformation, to permanent crop, irrigated [natural resource, land]: 0.00580045 m2
- Water, cooling, unspecified natural origin [natural resource, in water]: 4.89634e-6 m3
- Water, river [natural resource, in water]: 8.19051e-8 m3
- Water, unspecified natural origin [natural resource, in ground]: 0.000149987 m3
- Water, unspecified natural origin [natural resource, in water]: 3.79457e-5 m3
- Water, well, in ground [natural resource, in water]: 4.87368e-6 m3

## Emissions to nature
- Acetaldehyde [air, unspecified]: 1.80096e-9 kg
- Acetaldehyde [air, urban air close to ground]: 7.36924e-10 kg
- Ammonia [air, non-urban air or from high stacks]: 0.000708514 kg
- Ammonia [air, unspecified]: 1.80876e-8 kg
- Ammonia [air, urban air close to ground]: 6.70954e-9 kg
- Arsenic ion [air, unspecified]: 1.04553e-11 kg
- Arsenic ion [air, urban air close to ground]: 3.87835e-12 kg
- Benzene [air, unspecified]: 9.5143e-9 kg
- Benzene [air, urban air close to ground]: 3.5293e-9 kg
- Benzene, ethyl- [air, unspecified]: 3.13658e-10 kg
- Benzene, ethyl- [air, urban air close to ground]: 1.1635e-10 kg
- Benzene, hexachloro- [air, unspecified]: 7.5278e-17 kg
- Benzene, hexachloro- [air, urban air close to ground]: 2.79241e-17 kg
- Benzo(a)pyrene [air, unspecified]: 5.22764e-12 kg
- Benzo(a)pyrene [air, urban air close to ground]: 1.93917e-12 kg
- Bromine [air, unspecified]: 6.27317e-10 kg
- Bromine [air, urban air close to ground]: 2.32701e-10 kg
- Cadmium II [air, unspecified]: 7.3187e-12 kg
- Cadmium II [air, urban air close to ground]: 2.71484e-12 kg
- Calcium [air, unspecified]: 6.11634e-8 kg
- Calcium [air, urban air close to ground]: 2.26883e-8 kg
- Carbon dioxide, fossil [air, low population density, long-term]: 2.13076e-5 kg
- Carbon dioxide, fossil [air, non-urban air or from high stacks]: 0.00601609 kg
- Carbon dioxide, from soil or biomass stock [air, non-urban air or from high stacks]: 0.00648463 kg
- Carbon dioxide, non-fossil [air, unspecified]: 0.00111871 kg
- Carbon dioxide, non-fossil [air, urban air close to ground]: 0.0296852 kg
- Carbon monoxide, non-fossil [air, unspecified]: 3.13658e-6 kg
- Carbon monoxide, non-fossil [air, urban air close to ground]: 7.7567e-7 kg
- Chlorine [air, unspecified]: 1.88195e-9 kg
- Chlorine [air, urban air close to ground]: 6.98103e-10 kg
- Chromium III [air, unspecified]: 4.14029e-11 kg
- Chromium III [air, urban air close to ground]: 1.53583e-11 kg
- Chromium VI [air, unspecified]: 4.18211e-13 kg
- Chromium VI [air, urban air close to ground]: 1.55134e-13 kg
- Copper ion [air, unspecified]: 2.30016e-10 kg
- Copper ion [air, urban air close to ground]: 8.53237e-11 kg
- Dinitrogen monoxide [air, low population density, long-term]: 1.35072e-9 kg
- Dinitrogen monoxide [air, non-urban air or from high stacks]: 8.36651e-5 kg
- Dinitrogen monoxide [air, unspecified]: 2.40471e-8 kg
- Dinitrogen monoxide [air, urban air close to ground]: 8.9202e-9 kg
- Dioxins, measured as 2,3,7,8-tetrachlorodibenzo-p-dioxin [air, unspecified]: 3.24114e-16 kg
- Dioxins, measured as 2,3,7,8-tetrachlorodibenzo-p-dioxin [air, urban air close to ground]: 1.19161e-16 kg
- Fluorine [air, unspecified]: 5.22764e-10 kg
- Fluorine [air, urban air close to ground]: 1.93917e-10 kg
- Formaldehyde [air, unspecified]: 6.64722e-8 kg
- Formaldehyde [air, urban air close to ground]: 1.57858e-7 kg
- Hexane [air, urban air close to ground]: 5.94541e-6 kg
- Hydrocarbons, aliphatic, alkanes, unspecified [air, unspecified]: 9.5143e-9 kg
- Hydrocarbons, aliphatic, alkanes, unspecified [air, urban air close to ground]: 3.5293e-9 kg
- Hydrocarbons, aliphatic, unsaturated [air, unspecified]: 3.24114e-8 kg
- Hydrocarbons, aliphatic, unsaturated [air, urban air close to ground]: 1.20229e-8 kg
- Lead II [air, unspecified]: 2.61382e-10 kg
- Lead II [air, urban air close to ground]: 9.69587e-11 kg
- Magnesium [air, unspecified]: 3.7639e-9 kg
- Magnesium [air, urban air close to ground]: 1.39621e-9 kg
- Manganese II [air, unspecified]: 1.7774e-9 kg
- Manganese II [air, urban air close to ground]: 6.59319e-10 kg
- Mercury II [air, unspecified]: 3.13658e-12 kg
- Mercury II [air, urban air close to ground]: 1.1635e-12 kg
- Methane, fossil [air, low population density, long-term]: 3.03912e-10 kg
- Methane, non-fossil [air, unspecified]: 3.13658e-8 kg
- Methane, non-fossil [air, urban air close to ground]: 5.81752e-9 kg
- Methanol [air, non-urban air or from high stacks]: 2.81055e-8 kg
- Methanol [air, unspecified]: 6.08986e-8 kg
- NMVOC, non-methane volatile organic compounds [air, unspecified]: 1.70132e-6 kg
- NMVOC, non-methane volatile organic compounds [air, urban air close to ground]: 6.40721e-7 kg
- Nickel II [air, unspecified]: 6.27317e-11 kg
- Nickel II [air, urban air close to ground]: 2.32701e-11 kg
- Nitrogen oxides [air, non-urban air or from high stacks]: 0.000144419 kg
- Nitrogen oxides [air, unspecified]: 2.35244e-6 kg
- Nitrogen oxides [air, urban air close to ground]: 7.60475e-7 kg
- PAH, polycyclic aromatic hydrocarbons [air, unspecified]: 1.16054e-10 kg
- PAH, polycyclic aromatic hydrocarbons [air, urban air close to ground]: 4.30497e-11 kg
- Particulate Matter, < 2.5 um [air, unspecified]: 4.70488e-7 kg
- Particulate Matter, < 2.5 um [air, urban air close to ground]: 7.29258e-8 kg
- Particulate Matter, > 10 um [air, unspecified]: 4.71901e-7 kg
- Particulate Matter, > 2.5 um and < 10um [air, unspecified]: 2.61382e-8 kg
- Phenol, pentachloro- [air, unspecified]: 8.46878e-14 kg
- Phenol, pentachloro- [air, urban air close to ground]: 3.14146e-14 kg
- Phosphorus [air, unspecified]: 3.13658e-9 kg
- Phosphorus [air, urban air close to ground]: 1.1635e-9 kg
- Potassium I [air, unspecified]: 2.44654e-7 kg
- Potassium I [air, urban air close to ground]: 9.07533e-8 kg
- Sodium [air, unspecified]: 1.35919e-8 kg
- Sodium [air, urban air close to ground]: 5.04185e-9 kg
- Sulfur dioxide [air, unspecified]: 2.61382e-8 kg
- Sulfur dioxide [air, urban air close to ground]: 9.69587e-9 kg
- Toluene [air, unspecified]: 3.13658e-9 kg
- Toluene [air, urban air close to ground]: 1.1635e-9 kg
- Water [air, non-urban air or from high stacks]: 0.00342983 m3
- Water [air, unspecified]: 1.94702e-6 m3
- Zinc II [air, unspecified]: 3.13658e-9 kg
- Zinc II [air, urban air close to ground]: 1.1635e-9 kg
- m-Xylene [air, unspecified]: 1.25463e-9 kg
- m-Xylene [air, urban air close to ground]: 4.65402e-10 kg
- Azoxystrobin [soil, agricultural]: 2.21723e-6 kg
- Cadmium II [soil, agricultural]: 1.73536e-7 kg
- Chlorothalonil [soil, agricultural]: 8.39839e-9 kg
- Chlorpyrifos methyl [soil, agricultural]: 3.51059e-7 kg
- Chromium III [soil, agricultural]: 1.7949e-6 kg
- Copper ion [soil, agricultural]: 8.30842e-6 kg
- Cyproconazole [soil, agricultural]: 3.6924e-6 kg
- Ethofumesate [soil, agricultural]: 6.35878e-8 kg
- Fenpropimorph [soil, agricultural]: 1.79965e-8 kg
- Fungicides, unspecified [soil, agricultural]: 3.03542e-9 kg
- Glyphosate [soil, agricultural]: 2.59947e-6 kg
- Hexaconazole [soil, agricultural]: 9.73885e-7 kg
- Lead II [soil, agricultural]: 5.76436e-7 kg
- Mercury II [soil, agricultural]: 3.28228e-9 kg
- Metaldehyde [soil, agricultural]: 9.59819e-9 kg
- Metamitron [soil, agricultural]: 2.42353e-7 kg
- Nickel II [soil, agricultural]: 2.55952e-7 kg
- Paraquat [soil, agricultural]: 3.81484e-6 kg
- Phenmedipham [soil, agricultural]: 4.43915e-8 kg
- Pyraclostrobin [soil, agricultural]: 1.77138e-6 kg
- Terbufos [soil, agricultural]: 4.88299e-6 kg
- Thiamethoxam [soil, agricultural]: 2.95229e-6 kg
- Zinc II [soil, agricultural]: 2.57614e-6 kg
- BOD5, Biological Oxygen Demand [water, ground-]: 0.00832674 kg
- BOD5, Biological Oxygen Demand [water, surface water]: 1.1734e-6 kg
- COD, Chemical Oxygen Demand [water, ground-]: 0.0166535 kg
- COD, Chemical Oxygen Demand [water, surface water]: 1.82003e-6 kg
- Cadmium II [water, ground-]: 5.20713e-10 kg
- Cadmium II [water, surface water]: 2.30616e-9 kg
- Calcium II [water, surface water]: 1.9811e-9 kg
- Carbonate [water, surface water]: 1.92237e-8 kg
- Chloride [water, surface water]: 3.96214e-7 kg
- Chlorine [water, surface water]: 2.46337e-8 kg
- Chromium III [water, ground-]: 2.39291e-7 kg
- Chromium III [water, surface water]: 2.17995e-7 kg
- Copper ion [water, ground-]: 4.19265e-8 kg
- Copper ion [water, surface water]: 3.22818e-7 kg
- DOC, Dissolved Organic Carbon [water, ground-]: 0.00616796 kg
- DOC, Dissolved Organic Carbon [water, surface water]: 6.74086e-7 kg
- Dissolved solids [water, surface water]: 3.30686e-6 kg
- Lead II [water, ground-]: 3.7946e-9 kg
- Lead II [water, surface water]: 1.13564e-7 kg
- Mercury II [water, ground-]: 4.78419e-10 kg
- Mercury II [water, surface water]: 5.13294e-10 kg
- Nickel II [water, ground-]: 1.39741e-10 kg
- Nickel II [water, surface water]: 1.59546e-7 kg
- Nitrate [water, ground-]: 0.00464388 kg
- Nitrogen [water, surface water]: 3.3753e-7 kg
- Oils, non-fossil [water, surface water]: 5.79082e-7 kg
- Phosphate [water, ground-]: 2.1544e-6 kg
- Phosphate [water, surface water]: 1.20584e-5 kg
- Phosphorus [water, surface water]: 5.70795e-6 kg
- Sodium [water, unspecified]: 1.2603e-8 kg
- Sulfur [water, surface water]: 5.33978e-9 kg
- Suspended solids, unspecified [water, surface water]: 1.35627e-6 kg
- TOC, Total Organic Carbon [water, ground-]: 0.00616796 kg
- TOC, Total Organic Carbon [water, surface water]: 6.74086e-7 kg
- Water [water, ground-]: 0.000443326 m3
- Water [water, surface water]: 0.00196693 m3
- Zinc II [water, ground-]: 2.60138e-7 kg
- Zinc II [water, surface water]: 3.90146e-7 kg

## Sampling procedure
The data for this dataset was generated within a project in 2009-2011 financed by the Swiss Federal Office for Energy.
