# treatment of sewage sludge, 70% water, WWT, condensate from light oil boiler, municipal incineration

Dataset: EcoSpold 2, unit process
Geography: GLO
Time period: 2006-01-01 to 2022-12-31
Technology level: current
Classification: ISIC rev.4 ecoinvent: 3821:Treatment and disposal of non-hazardous waste
Scenario: Business-as-Usual
System model: Allocation at the point of substitution
Generated by: Nikolia Stoikou
Database: ecoinvent
isCopyrightProtected: true

## General comment
The process represents the treatment of a waste (sewage sludge) that is exclusively produced from another waste treatment. Municipal incineration is the controlled combustion of a waste. Sewage sludge is generated in the wastewater treatment of 'condensate from light oil boiler'. Recommended use of this dataset: to be used within the specific chain of treatments for 'condensate from light oil boiler'. Share of biogenic carbon in the sludge: 0%.

## Included activities start
The activity starts with the waste being available at the gate of the treatment facility. Collection and transportation of the waste to the treatment plant is not included.

## Included activities end
The activity ends with the waste being treated and waste-specific emissions from the incineration process are released to the environment (air and water).

## Geography
Modelling parameters affecting the treatment technology are not specific to this geography.

## Technology
The waste is treated in the incineration plant with flue gas cleaning. Incineration is the controlled combustion of a waste. Auxiliary material consumption for this step of air pollution control (APC) are included in the process. Infrastructure is also included in the process. Air polution control includes, electrostatic precipitator for fly ash (ESP), wet flue gas scrubber and 25% SNCR , 42.77% SCR-high dust , 32.68% SCR-low dust -DeNOx facilities and 0% without DeNOx (weighted according to mass of burnt waste). Efficiency of iron scrap separation from slag : 58%. Efficiency of aluminium scrap separation from slag : 31%. Efficiency of copper scrap separation from slag : 31%. Gross electric efficiency technology mix 15.84% and Gross thermal efficiency technology mix 28.51%

## Reference product
- heat, for reuse in municipal waste incineration only: 1 MJ; By-product classification allocatable product; CPC 17300: Steam and hot water; lognormal variance with pedigree 0.35159, pedigree (1,1,1,1,1)
  net useful heat generated from this waste and used in internal MSWI plant energy redistribution.
  Uncertainty: uncertainty is calculated from uncertainties in waste composition and uncertainties in energy efficiency and the uncertainty in internal energy demand
  production volume 316821 MJ
    Calculated from the production volume of the reference product in proportion to the respective output amounts.
  property price 0.0106 EUR2005
    Average European district heat price from Ecoheatcool and Euroheat 2005-2006, Ecoheat Work package 1: The European heat market. Final report. 10.6 EUR/GJ i s the price of district heat. http://www.solarthermalworld.org/files/Ecoheatcool%20WP1%20Web.pdf?download
  properties: carbon allocation 0 kg, carbon content 0

## Inputs from technosphere
- chimney: 8.10176e-7 m
- condensate from light oil boiler: -9.83599e-6 m3
- electricity, low voltage: 8.85784e-5, 0.000175542, 0.00168626, 3.00804e-5, 0.000602666, 5.47025e-6, 4.40892e-5 kWh (7 suppliers, which the file names only by identifier); sum of these 0.00263269 kWh
- hazardous waste, for incineration: -4.08033e-6, -6.94964e-8 kg (2 suppliers, which the file names only by identifier); sum of these -4.14983e-6 kg
- light fuel oil: 0.0196531, 0.000392194, 0.00195073, 0.000187565, 0.000139392, 0.000129448, 0.000966551 kg (7 suppliers, which the file names only by identifier); sum of these 0.023419 kg
- oil boiler, 100kW: 3.30676e-8 unit
- oil boiler, 10kW: 3.30676e-7 unit
- oil storage, 3000l: 3.08632e-7 unit

## Emissions to nature
- Acetaldehyde [air, urban air close to ground]: 2.04991e-8 kg
- Acetone [air, urban air close to ground]: 4.99979e-8 kg
- Acrolein [air, urban air close to ground]: 1.14995e-8 kg
- Benzaldehyde [air, urban air close to ground]: 5.99975e-9 kg
- Benzene [air, urban air close to ground]: 1.99992e-8 kg
- Butane [air, urban air close to ground]: 1.49994e-7 kg
- Carbon dioxide, fossil [air, urban air close to ground]: 0.0739969 kg
- Carbon monoxide, fossil [air, urban air close to ground]: 8.24965e-6 kg
- Copper ion [air, urban air close to ground]: 3.99983e-10 kg
- Dinitrogen monoxide [air, urban air close to ground]: 6.99971e-7 kg
- Dioxins, measured as 2,3,7,8-tetrachlorodibenzo-p-dioxin [air, urban air close to ground]: 5.69976e-17 kg
- Ethane [air, urban air close to ground]: 1.99992e-8 kg
- Ethylene [air, urban air close to ground]: 4.99979e-8 kg
- Ethyne [air, urban air close to ground]: 9.99958e-9 kg
- Formaldehyde [air, urban air close to ground]: 5.99975e-9 kg
- Hydrocarbons, aliphatic, alkanes, unspecified [air, urban air close to ground]: 2.49989e-7 kg
- Hydrocarbons, aliphatic, unsaturated [air, urban air close to ground]: 1.99992e-8 kg
- Hydrocarbons, aromatic [air, urban air close to ground]: 1.99992e-8 kg
- Hydrogen fluoride [air, urban air close to ground]: 4.49981e-9 kg
- Mercury II [air, urban air close to ground]: 4.99979e-10 kg
- Methane, fossil [air, urban air close to ground]: 1.99992e-7 kg
- Nitrogen oxides [air, urban air close to ground]: 2.74988e-5 kg
- PAH, polycyclic aromatic hydrocarbons [air, urban air close to ground]: 4.59981e-10 kg
- Particulate Matter, < 2.5 um [air, urban air close to ground]: 4.99979e-7 kg
- Pentane [air, urban air close to ground]: 9.99958e-8 kg
- Propanal [air, urban air close to ground]: 5.99975e-9 kg
- Propane [air, urban air close to ground]: 2.99987e-8 kg
- Propene [air, urban air close to ground]: 1.99992e-8 kg
- Sulfur dioxide [air, urban air close to ground]: 4.56671e-5 kg
- Toluene [air, urban air close to ground]: 9.99958e-9 kg
- Zinc II [air, urban air close to ground]: 4.99979e-10 kg

## Extrapolations
Modelling parameters are based on an average municipal solid waste incineration plant in Switzerland for the year of 2010 (grate incinerators).
