# [thio]carbamate-compound production

Dataset: EcoSpold 2, unit process
Geography: RER
Time period: 2000-01-01 to 2022-12-31
Technology level: current
Classification: EcoSpold01Categories: agricultural means of production/pesticides
Classification: ISIC rev.4 ecoinvent: 2021:Manufacture of pesticides and other agrochemical products
Tags: ConvertedDataset
Scenario: Business-as-Usual
System model: Allocation at the point of substitution
Share of production covered: 100 %
Generated by: Jürgen Sutter
Published in: Nemecek, T. 2007
Database: ecoinvent
isCopyrightProtected: true

## General comment
This dataset represents the production of (thio)carbamate-compunds (1 kg of active ingredient). Raw materials are modelled with a stoichiometric calculation. Energy consumption is modelled with data from a similar process. The emissions are estimated. Infrastructure is included with a default value.
Production of (thio)carbamate-compunds including materials, energy uses, infrastructure and emissions..

## Included activities start
From reception of precursors (acetaldehyde, acetic anhydride, ammonia, aniline, benzyl chloride, bromine, calcium carbide, carbon dioxide, carbon monoxide, chlorine, dimethyl sulfate, ethanol, ethyl acetate, ethylenediamine, hydrochloric acid, hydrogen, hydrogen cyanide, hydrogen sulfide, iodine, methanol, nitrobenzene, nitrogen, oxygen, phosgene, phophorus, propanal, sodium hydroxide, sulfur, sulfur trioxide, sulfuric acid, toluene, water decarbonised, and "water, salt, sole") at the factory gate.

## Included activities end
This activity ends with (thio)carbamate-compunds at the factory gate. The dataset includes the input materials, energy uses, infrastructure and emissions. The dataset doesn't include emulsives, additives etc.

## Geography
The inventory is modelled for Europe.

## Technology
Carbamates are compounds (mostly insecticides) with an N-methyl amide functional group or an amide functional group with substituents besides methyl groups.
Thiocarbamates are herbicides with a carbamate structure where sulphur replaces one of the oxygens in the amide functional group. Carbamates are produced by reacting a chloroformate with an amine. If a thiochloroformate is used instead the product is a thiocarbamate.
The dataset [thio]carbamate-compounds was calculated from the arithmetic mean of all inputs and outputs of the production of asulam, carbetamide, desmedipham, orbencarb, pirimicarb, and prosulfocarb.

Asulam is produced in five steps from aniline:
C6H7N + C2H4O2 → C8H9NO + H2O
C8H9NO + ClSO3H → C8H8ClNO3S + H2O
C8H8ClNO3S + NH3 → C8H10N2O3S + HCl
C8H10N2O3S + C2H3ClO2 → C10H12N2O5S + HCl
C10H12N2O5S + NaOH → C8H10N2O4S + C2H3O2Na
Precursors that are used for the asulam production are chlorosulfonic acid (ClSO2OH) and methyl chloroformate (C2H3ClO2).

Carbetamide is produced in five steps from acetaldehyde:
C2H4O + HCN → C3H5NO
C3H5NO + HCl + 2 H2O → C3H6O3 + NH4Cl
C3H6O3 + CH4O → C4H8O3 + H2O
C4H8O3 + C2H7N → C5H11O2N + CH4O
C5H11O2N + C7H5NO → C12H16N2O3
Precursors that are used for the carbetamide production are ethylamine (C2H7N) and phenyl isocyanate (C7H5NO).

Desmedipham is produced in six steps from nitrobenzene:
C6H5NO2 + H2SO4 → C6H5NO5S + H2O
C6H5NO5S + 3 H2 → C6H7O3S + 2 H2O
C6H7NO3S + 3 NaOH → C6H6NONa + Na2SO3 + 2 H2O
C6H6NONa + H2SO4 → C6H7NO + NaHSO4
C6H7NO + C3H5ClO2 → C9H11NO3 + HCl
C9H11NO3 + C7H5NO → C16H16N2O4
Precursors that are used for the desmedipham production are phenyl isocyanate (C7H5NO) and ethyl chloroformate (C3H5ClO2).

Orbencarb is produced in two steps from diethyl amine:
C4H11N + COS → C5H11NOS
C5H11NOS + C7H6ClBr → C12H16ClNOS + HBr
Precursors that are used for the orbencarb production are carbonyl sulfide (COS) and 2-chloro benzyl bromide (C7H6ClBr).

Pirimicarb is produced in six steps from ethyl acetate:
2 C4H8O2 → C6H10O3 + C2H6O
C6H10O3 + H2O → C4H6O3 + C2H6O
C4H6O3 + CH3I → C5H8O3 + HI
C5H8O3 + C2H6O → C7H12O3 + H2O
C7H12O3 + C6H20N6SO4 → C8H14N3O + C2H6O + H2O + H2SO4
C8H14N3O + C3H6ClNO → C11H18N4O2 + HCl
Precursors that are used for the pirimicarb production are dimethylcarbamoyl chloride (C3H6ClNO), N,N-dimethyl guanidine sulfate (C6H20N6SO4), and methyl iodide (CH3I).

Prosulfocarb is produced in three steps from propanal:
2 C3H6O + 2 H2 + NH3 → C6H15N + 2 H2O
C6H15N + CCl2O → C7H14ClNO + HCl
C7H14ClNO + C7H8S → C14H21NOS + HCl
A precursor that is used for the prosulfocarb production is benzyl mercaptan (C7H8S).

Precursors:

Benzyl mercaptan (C7H8S) is produced in two steps from hydrogen sulfide:
H2S + NaOH → NaSH + H2O
NaSH + C7H7Cl → C7H8S + NaCl

Carbonyl sulfide (COS) is produced from carbon monoxide and sulfur:
CO + S → COS

2-Chloro benzyl bromide (C7H6ClBr) is produced in two steps from toluene:
C7H8 + Cl2 → C7H7Cl + HCl
C7H7Cl + Br2 → C7H6ClBr + HBr

Chlorosulfonic acid (ClSO2OH) is produced from hydrogen chloride and sulfur trioxide:
HCl + SO3 → ClSO2OH

Dimethyl carbamoyl chloride (C3H6ClNO) is produced from phosgene and dimethyl amine:
C2H7N + CCl2O → C3H6ClNO + HCl

N,N-Dimethyl guanidine sulfate (C6H20N6SO4) is produced in four steps from calcium carbide:
CaC2 + N2 + O2 → CaCN2 + CO2
CaCN2 + CO2 + H2O → CH2N2 + CaCO3
C2H7N + CH2N2 → C3H9N3
C3H9N3 + H2SO4 → C6H20N6SO4

Ethylamine (C2H7N) is produced from ethanol and ammonia:
C2H6O + NH3 → C2H7N + H2O

Ethyl chloroformate (C3H5ClO2) is produced from ethanol and phosgene:
C2H6O + CCl2O → C3H5ClO2 + HCl

Methyl chloroformate (C2H3ClO2) is produced from methanol and phosgene:
CH4O + CCl2O → C2H3ClO2 + HCl

Methyl iodide (CH3I) is produced from methanol and iodine:
10 CH4O + 5 I2 + 2 P → 10 CH3I + 2 H3PO4 + 2 H2O

Phenyl isocyanate (C7H5NO) is produced from anilinie and phosgene:
C6H7N + CCl2O → C7H5NO + 2 HCl

## Time period
Time of publications

## Parameters
- fraction, cooling water, cooling pond system, to air: 0.032 dimensionless; name fraction_CW_CP_to_air; lognormal variance with pedigree 0.0413, pedigree (2,3,1,3,1)
  Calculated based on literature value (Scown, C.D., 2011, Water Footprint of U.S. Transportation Fuels and supplying information of the article) (Vionnet, S., Quantis Water Database - Technical Report, 2012).
- fraction, cooling water, once-through system, to air: 0.004 dimensionless; name fraction_CW_OT_to_air; lognormal variance with pedigree 0.0413, pedigree (2,3,1,3,1)
  (same comment as for fraction, cooling water, cooling pond system, to air)
- fraction, cooling water, recirculating system, to air: 0.771 dimensionless; name fraction_CW_R_to_air; lognormal variance with pedigree 0.0413, pedigree (2,3,1,3,1)
  (same comment as for fraction, cooling water, cooling pond system, to air)
- fraction, cooling water, to air: 0.3875 dimensionless; name fraction_CW_to_air; = (0.5*fraction_CW_OT_to_air)+(0.5*fraction_CW_R_to_air); lognormal variance with pedigree 0.092025, pedigree (4,4,3,2,4)
  Calculated value based on literature value (see comments of the other parametres present in this dataset) and expert opinion. In the case when no industry/literature data are available about the type of cooling or directly fraction, cooling water, to air specific for the process a default assumption is applied. It is assumed that the once-through cooling system is used in 50% of all cases and recirculating system is used in another 50% of all cases.
- fraction, process water, to air: 0.205 dimensionless; name fraction_PW_to_air; lognormal variance with pedigree 0.092025, pedigree (4,4,3,2,4)
  Literature value (Statistics Canada, 2007 & Shaffer, K.H., 2008, Consumptive water use in the Great Lakes Basin, USGS) (Vionnet, S., Quantis Water Database - Technical Report, 2012).
- fraction, water, decarbonised, to air: 0.3875 dimensionless; name fraction_WDC_to_air; = fraction_CW_to_air; lognormal variance with pedigree 0.092025, pedigree (4,4,3,2,4)
  Calculated value. See comments in the other parametres present in this dataset. Decarbonised water is considered to be always used as cooling water, thus cooling water fractions to air are applied to all carbonised water input flows to calculate the amount of water consumed in the processes.

## Reference product
- [thio]carbamate-compound: 1 kg; By-product classification allocatable product; CPC 34663: Herbicides, anti-sprouting products and plant-growth regulators
  EcoSpold01Location=RER
  [Thio]carbamates can have different modes of action. Asulam, which is a herbicide, acts as an inhibitor of 7,8-dihydro-pteroate synthetase (DHP); desmedipham, which is also a herbicide, acts as an inhibitor of photosynthesis at photosystem II site A; orbencarb and prosulfocarb, also herbicides, act as inhibitors of lipid synthesis, not ACCase inhibition; and Pirimicarb, which is an insecticide, acts as a cholinesterase inhibitor.
  production volume 5.24958e7 kg
    Unknown
    The addition of the consumption volumes in the US in 2002 (from USGS, 2002 Pesticide use Maps) of the [thio]carbamate-compounds aldicarb, asulam, carbaryl, carbofuran, cycloate, desmedipham, EPTC, formetanate HCl, indoxacarb, metam-sodium, methomyl, molinate, oxamyl, pebulate, phenmedipham, propamocarb, thiobencarb, thiodicarb, triallate has been used to estimate the production volumes of this type of pesticide in the Europe. For that, it has been extrapolated to a Global production mix using the ha of Arable land and Permanent crops of US versus the ha of Arable land and Permanent crops in the Europe in 2002 (299/179 million ha; FAOSTAT).
  property carbon content, fossil 0.626349
    Approximated as an unweighted average of the C-content of the [thio]carbamate-compounds (Tab 2.25 Sutter, 2010) carbofuran,orbencarb, prosulfocarb
  property price 3.81 EUR2005
    Calculated value based on data from United Nations Commodity Trade Statistics Database (comtrade.un.org). UN comtrade category: 293020 Thiocarbamates and dithiocarbamates. Year 2005. Using exchange rate of 1EURO = 1.209 USD. Average of price of import into 5 main markets (EU, US, JP, IN and CN).
  properties: carbon allocation 0.626349 kg, carbon content 0.626349, carbon content, non-fossil 0, dry mass 1 kg, water content 0, water in wet mass 0 kg, wet mass 1 kg

## Inputs from technosphere
- acetaldehyde: 0.019846 kg; source Unger T A 1996; lognormal variance with pedigree 0.044, pedigree (4,5,4,1,1)
  EcoSpold01Location=RER
  Stoichiometric calculation, assuming an efficiency of 95% per reaction step.
  Further references:
  Chahal et al. 2006. Surinder P. Chahal and John N. Starr: Lactic Acid. In: Ullmann's Encyclopedia of Industrial Chemistry, Seventh Edition, 2009 Electronic Release (ed. Fiedler E., Grossmann G., Kersebohm D., Weiss G. and Witte C.). 7 th Electronic Release Edition. Wiley InterScience, New York, Article Online Posting Date: January 15, 2006. Online-Version under: DOI: 10.1002/14356007.a15_097.pub2
  Uncertainty: Stoechiometric calculation
  properties: carbon content, fossil 0.545296, dry mass 1 kg, heating value, net 27.53 MJ, wet mass 1 kg
- acetic anhydride: 0.08528 kg; source Unger T A 1996; lognormal variance with pedigree 0.044, pedigree (4,5,4,1,1)
  EcoSpold01Location=RER
  Stoichiometric calculation, assuming an efficiency of 95% per reaction step.
  Uncertainty: Stoechiometric calculation
  properties: carbon content, fossil 0.470588, dry mass 1 kg, heating value, net 21.38 MJ, wet mass 1 kg
- ammonia, anhydrous, liquid: 0.045968 kg; source Unger T A 1996; lognormal variance with pedigree 0.044, pedigree (4,5,4,1,1)
  Stoichiometric calculation, assuming an efficiency of 95% per reaction step.
  Further references:
  Eller et al. 2000. Karsten Eller, Erhard Henkes, Roland Rossbacher, Hartmut Höke: Amines, Aliphatic. In: Ullmann's Encyclopedia of Industrial Chemistry, Seventh Edition, 2009 Electronic Release (ed. Fiedler E., Grossmann G., Kersebohm D., Weiss G. and Witte C.). 7 th Electronic Release Edition. Wiley InterScience, New York, Article Online Posting Date: June 15, 2000. Online-Version under: DOI: 10.1002/14356007.a02_001
  Kim et al. 2003. Kim S., Overcash M.: Energy in chemical manufacturing processes: gate-to-gate information for life cycle assessment. In: Journal of Chemical Technology & Biotechnology vol. 78, no. 9: 995-1005(11). 2003
  Lange et al. 2000. Ludwig Lange and Wolfgang Triebel: Sulfides, Polysulfides, and Sulfanes. In: Ullmann's Encyclopedia of Industrial Chemistry, Seventh Edition, 2009 Electronic Release (ed. Fiedler E., Grossmann G., Kersebohm D., Weiss G. and Witte C.). 7 th Electronic Release Edition. Wiley InterScience, New York, Article Online Posting Date: June 15, 2000. Online-Version under: DOI: 10.1002/14356007.a25_443
  EcoSpold01Location=RER
  Uncertainty: Stoechiometric calculation
  properties: dry mass 1 kg, wet mass 1 kg
- aniline: 0.26221 kg; source Unger T A 1996; lognormal variance with pedigree 0.044, pedigree (4,5,4,1,1)
  Stoichiometric calculation, assuming an efficiency of 95% per reaction step.
  EcoSpold01Location=RER
  Uncertainty: Stoechiometric calculation
  properties: carbon content, fossil 0.774194, dry mass 1 kg, heating value, net 32.56 MJ, wet mass 1 kg
- benzyl chloride: 0.092704 kg; source Unger T A 1996; lognormal variance with pedigree 0.044, pedigree (4,5,4,1,1)
  Stoichiometric calculation, assuming an efficiency of 95% per reaction step.
  FUrther references:
  Lange et al. 2000. Ludwig Lange and Wolfgang Triebel: Sulfides, Polysulfides, and Sulfanes. In: Ullmann's Encyclopedia of Industrial Chemistry, Seventh Edition, 2009 Electronic Release (ed. Fiedler E., Grossmann G., Kersebohm D., Weiss G. and Witte C.). 7 th Electronic Release Edition. Wiley InterScience, New York, Article Online Posting Date: June 15, 2000. Online-Version under: DOI: 10.1002/14356007.a25_443
  EcoSpold01Location=RER
  Uncertainty: Stoechiometric calculation
  properties: carbon content, fossil 0.666667, dry mass 1 kg, heating value, net 26.83 MJ, wet mass 1 kg
- calcium carbide, technical grade: 0.047802 kg; source Unger T A 1996; lognormal variance with pedigree 0.044, pedigree (4,5,4,1,1)
  Stoichiometric calculation, assuming an efficiency of 95% per reaction step.
  Further references:
  Güthner et al. 2006. Thomas Güthner and Bernd Mertschenk: Cyanamides. In: Ullmann's Encyclopedia of Industrial Chemistry, Seventh Edition, 2009 Electronic Release (ed. Fiedler E., Grossmann G., Kersebohm D., Weiss G. and Witte C.). 7 th Electronic Release Edition. Wiley InterScience, New York, Article Online Posting Date: July 15, 2006. Online-Version under: DOI: 10.1002/14356007.a08_139.pub2
  Güthner et al. 2006. Thomas Güthner, Bernd Mertschenk, Bernd Schulz: Guanidine and Derivatives. In: Ullmann's Encyclopedia of Industrial Chemistry, Seventh Edition, 2009 Electronic Release (ed. Fiedler E., Grossmann G., Kersebohm D., Weiss G. and Witte C.). 7 th Electronic Release Edition. Wiley InterScience, New York, Article Online Posting Date: July 15, 2006. Online-Version under: DOI: 10.1002/14356007.a12_545.pub2
  EcoSpold01Location=RER
  Uncertainty: Stoechiometric calculation
  properties: carbon content, fossil 0.375, dry mass 1 kg, heating value, net 11.36 MJ, wet mass 1 kg
- carbon dioxide, liquid: 0.031221 kg; source Unger T A 1996; lognormal variance with pedigree 0.044, pedigree (4,5,4,1,1)
  EcoSpold01Location=RER
  Stoichiometric calculation, assuming an efficiency of 95% per reaction step.
  Further references:
  Güthner et al. 2006. Thomas Güthner and Bernd Mertschenk: Cyanamides. In: Ullmann's Encyclopedia of Industrial Chemistry, Seventh Edition, 2009 Electronic Release (ed. Fiedler E., Grossmann G., Kersebohm D., Weiss G. and Witte C.). 7 th Electronic Release Edition. Wiley InterScience, New York, Article Online Posting Date: July 15, 2006. Online-Version under: DOI: 10.1002/14356007.a08_139.pub2
  Güthner et al. 2006. Thomas Güthner, Bernd Mertschenk, Bernd Schulz: Guanidine and Derivatives. In: Ullmann's Encyclopedia of Industrial Chemistry, Seventh Edition, 2009 Electronic Release (ed. Fiedler E., Grossmann G., Kersebohm D., Weiss G. and Witte C.). 7 th Electronic Release Edition. Wiley InterScience, New York, Article Online Posting Date: July 15, 2006. Online-Version under: DOI: 10.1002/14356007.a12_545.pub2
  Uncertainty: Stoechiometric calculation
  properties: carbon content, fossil 0.272727, dry mass 1 kg, heating value, net 8.27 MJ, wet mass 1 kg
- carbon monoxide: 0.046947 kg; source Unger T A 1996; lognormal variance with pedigree 0.044, pedigree (4,5,4,1,1)
  (same comment as for aniline)
  properties: carbon content, fossil 0.428571, dry mass 1 kg, heating value, net 12.99 MJ, wet mass 1 kg
  note on carbon content, fossil: CO. It is assumed that CO is produced from partial combustion of heavy heating oil.
- chemical factory, organics: 2.0143e-9 unit; lognormal variance with pedigree 0.448, pedigree (4,5,5,5,5)
  Estimation, based on a production capacity of 50,000 t per year and a plant life time of 50 years, therefore an amount of 4X10-10 units per kg of produced chemical is aded to the unit process of the respective chemical. The amount is accounted for each production step. This might be an overestimation in some multistep syntheses.
  EcoSpold01Location=RER
  Uncertainty: Estimation
- chlorine, liquid: 0.174 kg; source Unger T A 1996; lognormal variance with pedigree 0.044, pedigree (4,5,4,1,1)
  (same comment as for acetic anhydride)
  properties: dry mass 1 kg, wet mass 1 kg
- dimethyl sulfate: 0.066071 kg; source Unger T A 1996; lognormal variance with pedigree 0.044, pedigree (4,5,4,1,1)
  (same comment as for aniline)
  properties: carbon content, fossil 0.190476, dry mass 1 kg, heating value, net 11.54 MJ, wet mass 1 kg
- electricity, medium voltage: 1.77085 kWh; source Gendorf 2000; lognormal variance with pedigree 0.044, pedigree (4,5,4,1,1)
  EcoSpold01Location=UCTE
  Estimation, assuming a default value, originated from calculation of avarage consumption of electricity and heat per kg of product (3.2 MJ kg-1), and a resulting amount of electricity of 0,333 kW for every reaction step per kg reaction product, considering that the demand is made up of a mix that inlcudes 38% electricity. Additionally, reaction steps are approximated with energy consumption data, assuming that inventory flows can be estimated using process data for basic operation steps, available for specific organic chemicals.
  Uncertainty: Estimation
- ethanol, without water, in 99.7% solution state, from ethylene: 0.10513 kg; source Unger T A 1996; lognormal variance with pedigree 0.044, pedigree (4,5,4,1,1)
  (same comment as for aniline)
  properties: carbon content, fossil 0.521739, dry mass 1 kg, heating value, net 28.1 MJ, wet mass 1 kg
  note on heating value, net: Based on literature, page 275, Report 17: Jungbluth, N., Chudacoff, M., Dauriat, A., Dinkel, F., Doka, G., Faist Emmenegger, M., Gnansounou, E., Kljun, N., Schleiss, K., Spielmann, M., Stettler, C., Sutter, J. 2007: Life Cycle Inventories of Bioenergy. ecoinvent report No. 17, Swiss Centre for Life Cycle Inventories, Dübendorf, CH.
- ethyl acetate: 0.12384 kg; source Unger T A 1996; lognormal variance with pedigree 0.044, pedigree (4,5,4,1,1)
  (same comment as for aniline)
  properties: carbon content, fossil 0.545455, dry mass 1 kg, heating value, net 31.32 MJ, wet mass 1 kg
- ethylenediamine: 0.11628 kg; source Unger T A 1996; lognormal variance with pedigree 0.044, pedigree (4,5,4,1,1)
  (same comment as for aniline)
  properties: carbon content, fossil 0.5, dry mass 1 kg, heating value, net 28.24 MJ, wet mass 1 kg
- heat, district or industrial, natural gas: 13.3426 MJ; source Gendorf 2000; lognormal variance with pedigree 0.044, pedigree (4,5,4,1,1)
  Estimation, assuming a default value, originated from calculation of avarage consumption of electricity and heat per kg of product (3.2 MJ kg-1), and a resulting amount of heat of 2 MJ for every reaction step per kg reaction product, considering that the demand is made up of a mix that includes 50% natural gas. Additionally, reaction steps are approximated with energy consumption data, assuming that inventory flows can be estimated using process data for basic operation steps, available for specific organic chemicals.
  Uncertainty: Estimation
  properties: heating value, net 1 MJ
- heat, district or industrial, other than natural gas: 7.44726 MJ; source Gendorf 2000; lognormal variance with pedigree 0.044, pedigree (4,5,4,1,1)
  Estimation, assuming a default value, originated from calculation of avarage consumption of electricity and heat per kg of product (3.2 MJ kg-1), and a resulting amount of heat of 2 MJ for every reaction step per kg reaction product, considering that the demand is made up of a mix that inlcudes 12% steam from external energy sources. Additionally, reaction steps are approximated with energy consumption data, assuming that inventory flows can be estimated using process data for basic operation steps, available for specific organic chemicals.
  Uncertainty: Estimation
  properties: heating value, net 1 MJ
- hydrochloric acid, without water, in 30% solution state: 0.089299 kg; source Unger T A 1996; lognormal variance with pedigree 0.044, pedigree (4,5,4,1,1)
  Stoichiometric calculation, assuming an efficiency of 100%.
  Further references:
  Chahal et al. 2006. Surinder P. Chahal and John N. Starr: Lactic Acid. In: Ullmann's Encyclopedia of Industrial Chemistry, Seventh Edition, 2009 Electronic Release (ed. Fiedler E., Grossmann G., Kersebohm D., Weiss G. and Witte C.). 7 th Electronic Release Edition. Wiley InterScience, New York, Article Online Posting Date: January 15, 2006. Online-Version under: DOI: 10.1002/14356007.a15_097.pub2
  Güthner et al. 2006. Thomas Güthner and Bernd Mertschenk: Cyanamides. In: Ullmann's Encyclopedia of Industrial Chemistry, Seventh Edition, 2009 Electronic Release (ed. Fiedler E., Grossmann G., Kersebohm D., Weiss G. and Witte C.). 7 th Electronic Release Edition. Wiley InterScience, New York, Article Online Posting Date: July 15, 2006. Online-Version under: DOI: 10.1002/14356007.a08_139.pub2
  EcoSpold01Location=RER
  Uncertainty: Stoechiometric calculation
  properties: dry mass 1 kg, heating value, net 3.32 MJ, wet mass 1 kg
- hydrogen cyanide: 0.012178 kg; source Unger T A 1996; lognormal variance with pedigree 0.044, pedigree (4,5,4,1,1)
  (same comment as for acetaldehyde)
  properties: carbon content, fossil 0.444444, dry mass 1 kg, heating value, net 17.95 MJ, wet mass 1 kg
- hydrogen sulfide: 0.026332 kg; source Unger T A 1996; lognormal variance with pedigree 0.044, pedigree (4,5,4,1,1)
  EcoSpold01Location=RER
  Stoichiometric calculation, assuming an efficiency of 95% per reaction step.
  Further references:
  Lange et al. 2000. Ludwig Lange and Wolfgang Triebel: Sulfides, Polysulfides, and Sulfanes. In: Ullmann's Encyclopedia of Industrial Chemistry, Seventh Edition, 2009 Electronic Release (ed. Fiedler E., Grossmann G., Kersebohm D., Weiss G. and Witte C.). 7 th Electronic Release Edition. Wiley InterScience, New York, Article Online Posting Date: June 15, 2000. Online-Version under: DOI: 10.1002/14356007.a25_443
  Uncertainty: Stoechiometric calculation
  properties: dry mass 1 kg, heating value, net 7.11 MJ, wet mass 1 kg
- hydrogen, liquid: 0.0074057 kg; source Unger T A 1996; lognormal variance with pedigree 0.044, pedigree (4,5,4,1,1)
  Stoichiometric calculation, assuming an efficiency of 95% per reaction step.
  Further references:
  Eller et al. 2000. Karsten Eller, Erhard Henkes, Roland Rossbacher, Hartmut Höke: Amines, Aliphatic. In: Ullmann's Encyclopedia of Industrial Chemistry, Seventh Edition, 2009 Electronic Release (ed. Fiedler E., Grossmann G., Kersebohm D., Weiss G. and Witte C.). 7 th Electronic Release Edition. Wiley InterScience, New York, Article Online Posting Date: June 15, 2000. Online-Version under: DOI: 10.1002/14356007.a02_001
  Kim et al. 2003. Kim S., Overcash M.: Energy in chemical manufacturing processes: gate-to-gate information for life cycle assessment. In: Journal of Chemical Technology & Biotechnology vol. 78, no. 9: 995-1005(11). 2003
  Lange et al. 2000. Ludwig Lange and Wolfgang Triebel: Sulfides, Polysulfides, and Sulfanes. In: Ullmann's Encyclopedia of Industrial Chemistry, Seventh Edition, 2009 Electronic Release (ed. Fiedler E., Grossmann G., Kersebohm D., Weiss G. and Witte C.). 7 th Electronic Release Edition. Wiley InterScience, New York, Article Online Posting Date: June 15, 2000. Online-Version under: DOI: 10.1002/14356007.a25_443
  Lindner et al. 2000. Otto Lindner and Lars Rodefeld: Benzenesulfonic Acids and Their Derivatives. In: Ullmann's Encyclopedia of Industrial Chemistry, Seventh Edition, 2009 Electronic Release (ed. Fiedler E., Grossmann G., Kersebohm D., Weiss G. and Witte C.). 7 th Electronic Release Edition. Wiley InterScience, New York, Article Online Posting Date: September 15, 2000. Online-Version under: DOI: 10.1002/14356007.a03_507
  EcoSpold01Location=RER
  Uncertainty: Stoechiometric calculation
  properties: dry mass 1 kg, heating value, net 120.21 MJ, wet mass 1 kg
- inert waste, for final disposal: -0.084035 kg; lognormal variance with pedigree 0.036, pedigree (4,5,1,1,1)
  EcoSpold01Location=CH
  Stoechiometric calculation
  Uncertainty: Stoechiometric calculation
  production volume
    Calculated from the production volume of [thio]carbamate-compound in proportion to the respective output amounts.
  properties: dry mass 0.995 kg, water content 0.00502513, wet mass 1 kg
- methanol: 0.092986 kg; source Unger T A 1996; lognormal variance with pedigree 0.044, pedigree (4,5,4,1,1)
  EcoSpold01Location=GLO
  Stoichiometric calculation, assuming an efficiency of 95% per reaction step.
  Further references:
  Chahal et al. 2006. Surinder P. Chahal and John N. Starr: Lactic Acid. In: Ullmann's Encyclopedia of Industrial Chemistry, Seventh Edition, 2009 Electronic Release (ed. Fiedler E., Grossmann G., Kersebohm D., Weiss G. and Witte C.). 7 th Electronic Release Edition. Wiley InterScience, New York, Article Online Posting Date: January 15, 2006. Online-Version under: DOI: 10.1002/14356007.a15_097.pub2
  Lyday 2000. Phyllis A. Lyday: Iodine and Iodine Compounds. In: Ullmann's Encyclopedia of Industrial Chemistry, Seventh Edition, 2009 Electronic Release (ed. Fiedler E., Grossmann G., Kersebohm D., Weiss G. and Witte C.). 7 th Electronic Release Edition. Wiley InterScience, New York, Article Online Posting Date: June 15, 2000. Online-Version under: DOI: 10.1002/14356007.a14_381
  Uncertainty: Stoechiometric calculation
  properties: carbon content, fossil 0.375, dry mass 1 kg, heating value, net 20 MJ, wet mass 1 kg
  note on heating value, net: Based on literature, page 533, Report 17: Jungbluth, N., Chudacoff, M., Dauriat, A., Dinkel, F., Doka, G., Faist Emmenegger, M., Gnansounou, E., Kljun, N., Schleiss, K., Spielmann, M., Stettler, C., Sutter, J. 2007: Life Cycle Inventories of Bioenergy. ecoinvent report No. 17, Swiss Centre for Life Cycle Inventories, Dübendorf, CH.
- nitrobenzene: 0.092959 kg; source Unger T A 1996; lognormal variance with pedigree 0.044, pedigree (4,5,4,1,1)
  EcoSpold01Location=RER
  Stoichiometric calculation, assuming an efficiency of 95% per reaction step.
  Further references:
  Lindner et al. 2000. Otto Lindner and Lars Rodefeld: Benzenesulfonic Acids and Their Derivatives. In: Ullmann's Encyclopedia of Industrial Chemistry, Seventh Edition, 2009 Electronic Release (ed. Fiedler E., Grossmann G., Kersebohm D., Weiss G. and Witte C.). 7 th Electronic Release Edition. Wiley InterScience, New York, Article Online Posting Date: September 15, 2000. Online-Version under: DOI: 10.1002/14356007.a03_507
  Uncertainty: Stoechiometric calculation
  properties: carbon content, fossil 0.606061, dry mass 1 kg, heating value, net 22.66 MJ, wet mass 1 kg
- nitrogen, liquid: 0.020913 kg; source Unger T A 1996; lognormal variance with pedigree 0.044, pedigree (4,5,4,1,1)
  (same comment as for carbon dioxide, liquid)
  properties: dry mass 1 kg, wet mass 1 kg
- oxygen, liquid: 0.022706 kg; source Unger T A 1996; lognormal variance with pedigree 0.044, pedigree (4,5,4,1,1)
  Stoichiometric calculation, assuming an efficiency of 100% per reaction step.
  Further references:
  Güthner et al. 2006. Thomas Güthner and Bernd Mertschenk: Cyanamides. In: Ullmann's Encyclopedia of Industrial Chemistry, Seventh Edition, 2009 Electronic Release (ed. Fiedler E., Grossmann G., Kersebohm D., Weiss G. and Witte C.). 7 th Electronic Release Edition. Wiley InterScience, New York, Article Online Posting Date: July 15, 2006. Online-Version under: DOI: 10.1002/14356007.a08_139.pub2
  Güthner et al. 2006. Thomas Güthner, Bernd Mertschenk, Bernd Schulz: Guanidine and Derivatives. In: Ullmann's Encyclopedia of Industrial Chemistry, Seventh Edition, 2009 Electronic Release (ed. Fiedler E., Grossmann G., Kersebohm D., Weiss G. and Witte C.). 7 th Electronic Release Edition. Wiley InterScience, New York, Article Online Posting Date: July 15, 2006. Online-Version under: DOI: 10.1002/14356007.a12_545.pub2
  EcoSpold01Location=RER
  Uncertainty: Stoechiometric calculation
  properties: dry mass 1 kg, wet mass 1 kg
- phosgene, liquid: 0.48383 kg; source Unger T A 1996; lognormal variance with pedigree 0.044, pedigree (4,5,4,1,1)
  EcoSpold01Location=RER
  Stoichiometric calculation, assuming an efficiency of 95% per reaction step.
  Assumed to be removed with an efficiency of 100% in the wastewater treatment.
  Uncertainty: Stoechiometric calculation
  properties: carbon content, fossil 0.122449, dry mass 1 kg, heating value, net 3.68 MJ, wet mass 1 kg
- phosphorus, white, liquid: 0.0056111 kg; source Unger T A 1996; lognormal variance with pedigree 0.044, pedigree (4,5,4,1,1)
  Stoichiometric calculation, assuming an efficiency of 95% per reaction step.
  Further references:
  Lyday 2000. Phyllis A. Lyday: Iodine and Iodine Compounds. In: Ullmann's Encyclopedia of Industrial Chemistry, Seventh Edition, 2009 Electronic Release (ed. Fiedler E., Grossmann G., Kersebohm D., Weiss G. and Witte C.). 7 th Electronic Release Edition. Wiley InterScience, New York, Article Online Posting Date: June 15, 2000. Online-Version under: DOI: 10.1002/14356007.a14_381
  EcoSpold01Location=RER
  Uncertainty: Stoechiometric calculation
  properties: dry mass 1 kg, wet mass 1 kg
- propanal: 0.089838 kg; source Unger T A 1996; lognormal variance with pedigree 0.044, pedigree (4,5,4,1,1)
  EcoSpold01Location=RER
  Stoichiometric calculation, assuming an efficiency of 95% per reaction step.
  Further references:
  Eller et al. 2000. Karsten Eller, Erhard Henkes, Roland Rossbacher, Hartmut Höke: Amines, Aliphatic. In: Ullmann's Encyclopedia of Industrial Chemistry, Seventh Edition, 2009 Electronic Release (ed. Fiedler E., Grossmann G., Kersebohm D., Weiss G. and Witte C.). 7 th Electronic Release Edition. Wiley InterScience, New York, Article Online Posting Date: June 15, 2000. Online-Version under: DOI: 10.1002/14356007.a02_001
  Kim et al. 2003. Kim S., Overcash M.: Energy in chemical manufacturing processes: gate-to-gate information for life cycle assessment. In: Journal of Chemical Technology & Biotechnology vol. 78, no. 9: 995-1005(11). 2003
  Lange et al. 2000. Ludwig Lange and Wolfgang Triebel: Sulfides, Polysulfides, and Sulfanes. In: Ullmann's Encyclopedia of Industrial Chemistry, Seventh Edition, 2009 Electronic Release (ed. Fiedler E., Grossmann G., Kersebohm D., Weiss G. and Witte C.). 7 th Electronic Release Edition. Wiley InterScience, New York, Article Online Posting Date: June 15, 2000. Online-Version under: DOI: 10.1002/14356007.a25_443
  Uncertainty: Stoechiometric calculation
  properties: carbon content, fossil 0.62069, dry mass 1 kg, heating value, net 31.32 MJ, wet mass 1 kg
- sodium hydroxide, without water, in 50% solution state: 0.80098 kg; source Unger T A 1996; lognormal variance with pedigree 0.044, pedigree (4,5,4,1,1)
  Stoichiometric calculation, assuming an efficiency of 100%.
  Further references:
  Lange et al. 2000. Ludwig Lange and Wolfgang Triebel: Sulfides, Polysulfides, and Sulfanes. In: Ullmann's Encyclopedia of Industrial Chemistry, Seventh Edition, 2009 Electronic Release (ed. Fiedler E., Grossmann G., Kersebohm D., Weiss G. and Witte C.). 7 th Electronic Release Edition. Wiley InterScience, New York, Article Online Posting Date: June 15, 2000. Online-Version under: DOI: 10.1002/14356007.a25_443
  Lindner et al. 2000. Otto Lindner and Lars Rodefeld: Benzenesulfonic Acids and Their Derivatives. In: Ullmann's Encyclopedia of Industrial Chemistry, Seventh Edition, 2009 Electronic Release (ed. Fiedler E., Grossmann G., Kersebohm D., Weiss G. and Witte C.). 7 th Electronic Release Edition. Wiley InterScience, New York, Article Online Posting Date: September 15, 2000. Online-Version under: DOI: 10.1002/14356007.a03_507
  EcoSpold01Location=RER
  Uncertainty: Stoechiometric calculation
  properties: dry mass 1 kg, heating value, net 3.03 MJ, wet mass 1 kg
- sulfur: 0.053653 kg; source Unger T A 1996; lognormal variance with pedigree 0.044, pedigree (4,5,4,1,1)
  (same comment as for aniline)
  properties: dry mass 1 kg, wet mass 1 kg
- sulfur trioxide: 0.11371 kg; source Unger T A 1996; lognormal variance with pedigree 0.044, pedigree (4,5,4,1,1)
  EcoSpold01Location=RER
  Stoichiometric calculation, assuming an efficiency of 95% per reaction step.
  Further references:
  Güthner et al. 2006. Thomas Güthner and Bernd Mertschenk: Cyanamides. In: Ullmann's Encyclopedia of Industrial Chemistry, Seventh Edition, 2009 Electronic Release (ed. Fiedler E., Grossmann G., Kersebohm D., Weiss G. and Witte C.). 7 th Electronic Release Edition. Wiley InterScience, New York, Article Online Posting Date: July 15, 2006. Online-Version under: DOI: 10.1002/14356007.a08_139.pub2
  Uncertainty: Stoechiometric calculation
  properties: dry mass 1 kg, wet mass 1 kg
- sulfuric acid: 0.20032 kg; source Unger T A 1996; lognormal variance with pedigree 0.044, pedigree (4,5,4,1,1)
  Stoichiometric calculation, assuming an efficiency of 95% per reaction step.
  Further references:
  Lindner et al. 2000. Otto Lindner and Lars Rodefeld: Benzenesulfonic Acids and Their Derivatives. In: Ullmann's Encyclopedia of Industrial Chemistry, Seventh Edition, 2009 Electronic Release (ed. Fiedler E., Grossmann G., Kersebohm D., Weiss G. and Witte C.). 7 th Electronic Release Edition. Wiley InterScience, New York, Article Online Posting Date: September 15, 2000. Online-Version under: DOI: 10.1002/14356007.a03_507
  EcoSpold01Location=RER
  Uncertainty: Stoechiometric calculation
  properties: dry mass 1 kg, wet mass 1 kg
- toluene, liquid: 0.076122 kg; source Unger T A 1996; lognormal variance with pedigree 0.044, pedigree (4,5,4,1,1)
  (same comment as for acetic anhydride)
  properties: carbon content, fossil 0.913043, dry mass 1 kg, heating value, net 38.17 MJ, wet mass 1 kg
- water, decarbonised: 0.0039704, 1.25057e-5, 0.0196949, 0.0130554, 0.000720737 kg (5 suppliers, which the file names only by identifier); sum of these 0.037454 kg; source Unger T A 1996; lognormal variance with pedigree 0.044, pedigree (4,5,4,1,1)
  Stoichiometric calculation, assuming an efficiency of 100%.
  Further references:
  Chahal et al. 2006. Surinder P. Chahal and John N. Starr: Lactic Acid. In: Ullmann's Encyclopedia of Industrial Chemistry, Seventh Edition, 2009 Electronic Release (ed. Fiedler E., Grossmann G., Kersebohm D., Weiss G. and Witte C.). 7 th Electronic Release Edition. Wiley InterScience, New York, Article Online Posting Date: January 15, 2006. Online-Version under: DOI: 10.1002/14356007.a15_097.pub2
  Güthner et al. 2006. Thomas Güthner and Bernd Mertschenk: Cyanamides. In: Ullmann's Encyclopedia of Industrial Chemistry, Seventh Edition, 2009 Electronic Release (ed. Fiedler E., Grossmann G., Kersebohm D., Weiss G. and Witte C.). 7 th Electronic Release Edition. Wiley InterScience, New York, Article Online Posting Date: July 15, 2006. Online-Version under: DOI: 10.1002/14356007.a08_139.pub2
  Güthner et al. 2006. Thomas Güthner, Bernd Mertschenk, Bernd Schulz: Guanidine and Derivatives. In: Ullmann's Encyclopedia of Industrial Chemistry, Seventh Edition, 2009 Electronic Release (ed. Fiedler E., Grossmann G., Kersebohm D., Weiss G. and Witte C.). 7 th Electronic Release Edition. Wiley InterScience, New York, Article Online Posting Date: July 15, 2006. Online-Version under: DOI: 10.1002/14356007.a12_545.pub2
  Stoichiometric calculation, assuming an efficiency of 100%.
  Further references:
  Chahal et al. 2006. Surinder P. Chahal and John N. Starr: Lactic Acid. In: Ullmann's Encyclopedia of Industrial Chemistry, Seventh Edition, 2009 Electronic Release (ed. Fiedler E., Grossmann G., Kersebohm D., Weiss G. and Witte C.). 7 th Electronic Release Edition. Wiley InterScience, New York, Article Online Posting Date: January 15, 2006. Online-Version under: DOI: 10.1002/14356007.a15_097.pub2
  Güthner et al. 2006. Thomas Güthner and Bernd Mertschenk: Cyanamides. In: Ullmann's Encyclopedia of Industrial Chemistry, Seventh Edition, 2009 Electronic Release (ed. Fiedler E., Grossmann G., Kersebohm D., Weiss G. and Witte C.). 7 th Electronic Release Edition. Wiley InterScience, New York, Article Online Posting Date: July 15, 2006. Online-Version under: DOI: 10.1002/14356007.a08_139.pub2
  Güthner et al. 2006. Thomas Güthner, Bernd Mertschenk, Bernd Schulz: Guanidine and Derivatives. In: Ullmann's Encyclopedia of Industrial Chemistry, Seventh Edition, 2009 Electronic Release (ed. Fiedler E., Grossmann G., Kersebohm D., Weiss G. and Witte C.). 7 th Electronic Release Edition. Wiley InterScience, New York, Article Online Posting Date: July 15, 2006. Online-Version under: DOI: 10.1002/14356007.a12_545.pub2
  EcoSpold01Location=RER
  Uncertainty: Stoechiometric calculation
  properties: wet mass 1 kg

## Inputs from nature
- Bromine [natural resource, in water]: 0.07853 kg; name bromine_input; source Unger T A 1996; lognormal variance with pedigree 0.044, pedigree (4,5,4,1,1)
  0.23% Br in water; Stoichiometric calculation, assuming an efficiency of 95% per reaction step.
  Uncertainty: Stoechiometric calculation
- Iodine [natural resource, in water]: 0.11494 kg; name iodine_input; source Unger T A 1996; lognormal variance with pedigree 0.044, pedigree (4,5,4,1,1)
  0.03% I; Stoichiometric calculation, assuming an efficiency of 95% per reaction step.
  Further references:
  Lyday 2000. Phyllis A. Lyday: Iodine and Iodine Compounds. In: Ullmann's Encyclopedia of Industrial Chemistry, Seventh Edition, 2009 Electronic Release (ed. Fiedler E., Grossmann G., Kersebohm D., Weiss G. and Witte C.). 7 th Electronic Release Edition. Wiley InterScience, New York, Article Online Posting Date: June 15, 2000. Online-Version under: DOI: 10.1002/14356007.a14_381
  Uncertainty: Stoechiometric calculation
- Water, cooling, unspecified natural origin [natural resource, in water]: 0.11931 m3; name water_cooling_UNO_input; source Gendorf 2000; lognormal variance with pedigree 0.044, pedigree (4,5,4,1,1)
  Estimation (24 kg cooling water per kg produced chemical per step).
  Uncertainty: Estimation
- Water, salt, sole [natural resource, in water]: 0.417277 m3; name water_salt_sole_input; = ((bromine_input/0.0023)+( iodine_input/0.0003))/1000; lognormal variance with pedigree 0.044, pedigree (4,5,4,1,1)
  There are intermediates containing bromine and iodine in this process and this input is used as an input in the bromine and iodine production.
  The concentration of bromine in water, salt, sole is 0.23% = 0.0023kg/kg. Cross-referenced: 0.25% (Ullmann's encyclopedia), 0.4% (USGS). The concentration of iodine in water, salt, sole is 0.03% = 0.0003kg/kg. Cross-referenced: 0.015% - 0.12% (Ullmann's encyclopedia).
  There are intermediates containing bromine and iodine in this process and this input is used as an input in the bromine and iodine production.
  The concentration of bromine in water, salt, sole is 0.23% = 0.0023kg/kg. Cross-referenced: 0.25% (Ullmann's encyclopedia), 0.4% (USGS). The concentration of iodine in water, salt, sole is 0.03% = 0.0003kg/kg. Cross-referenced: 0.015% - 0.12% (Ullmann's encyclopedia).
  Uncertainty: Stoechiometric calculation

## Emissions to nature
- Acetaldehyde [air, urban air close to ground]: 3.9692e-5 kg; lognormal variance with pedigree 0.188, pedigree (4,5,5,5,5)
  Estimation, based on the assumption that 0.2% of volatile input materials is emitted to air occurring from the purge vent, the destillation vent and fugitive emission sources.
  Uncertainty: Estimation
- Acetic acid [air, urban air close to ground]: 0.0001705 kg; lognormal variance with pedigree 0.188, pedigree (4,5,5,5,5)
  (same comment as for Acetaldehyde)
- Ammonia [air, urban air close to ground]: 9.4402e-5 kg; lognormal variance with pedigree 0.218, pedigree (4,5,5,5,5)
  (same comment as for Acetaldehyde)
- Aniline [air, urban air close to ground]: 0.00052438 kg; lognormal variance with pedigree 0.188, pedigree (4,5,5,5,5)
  (same comment as for Acetaldehyde)
- Carbon dioxide, fossil [air, urban air close to ground]: 0.49825 kg; lognormal variance with pedigree 0.1786, pedigree (4,5,5,5,5)
  Estimation, based on the assumption that 0.2% of volatile input materials is emitted to air occurring from the purge vent, the destillation vent and fugitive emission sources. Remaining gases like CH4 or CO are oxidated to CO2. The carbon contained in the removed carbon compounds from wastewater treatment was accounted as CO2 emissions to air (assuming a removal efficiency of 90%).
  Uncertainty: Estimation
- Carbon monoxide, fossil [air, urban air close to ground]: 9.3893e-5 kg; lognormal variance with pedigree 0.798, pedigree (4,5,5,5,5)
  (same comment as for Acetaldehyde)
- Chlorine [air, urban air close to ground]: 0.001685 kg; lognormal variance with pedigree 0.188, pedigree (4,5,5,5,5)
  (same comment as for Acetaldehyde)
- Diethylamine [air, urban air close to ground]: 0.00023255 kg; lognormal variance with pedigree 0.188, pedigree (4,5,5,5,5)
  (same comment as for Acetaldehyde)
- Dipropylamine [air, urban air close to ground]: 0.00014862 kg; lognormal variance with pedigree 0.188, pedigree (4,5,5,5,5)
  (same comment as for Acetaldehyde)
- Ethanol [air, urban air close to ground]: 0.00021025 kg; lognormal variance with pedigree 0.188, pedigree (4,5,5,5,5)
  (same comment as for Acetaldehyde)
- Ethyl acetate [air, urban air close to ground]: 0.00024769 kg; lognormal variance with pedigree 0.188, pedigree (4,5,5,5,5)
  (same comment as for Acetaldehyde)
- Hydrochloric acid [air, urban air close to ground]: 0.00010233 kg; lognormal variance with pedigree 0.188, pedigree (4,5,5,5,5)
  (same comment as for Acetaldehyde)
- Hydrogen [air, urban air close to ground]: 1.4811e-5 kg; lognormal variance with pedigree 0.188, pedigree (4,5,5,5,5)
  (same comment as for Acetaldehyde)
- Lactic acid [air, urban air close to ground]: 0.00011642 kg; lognormal variance with pedigree 0.188, pedigree (4,5,5,5,5)
  (same comment as for Acetaldehyde)
- Methanol [air, urban air close to ground]: 0.00018598 kg; lognormal variance with pedigree 0.188, pedigree (4,5,5,5,5)
  (same comment as for Acetaldehyde)
- Methyl lactate [air, urban air close to ground]: 0.00012781 kg; lognormal variance with pedigree 0.188, pedigree (4,5,5,5,5)
  (same comment as for Acetaldehyde)
- Propanal [air, urban air close to ground]: 0.00017968 kg; lognormal variance with pedigree 0.188, pedigree (4,5,5,5,5)
  (same comment as for Acetaldehyde)
- Sulfur dioxide [air, urban air close to ground]: 0.00018378 kg; lognormal variance with pedigree 0.1786, pedigree (4,5,5,5,5)
  (same comment as for Acetaldehyde)
- Sulfur trioxide [air, urban air close to ground]: 0.0056285 kg; lognormal variance with pedigree 0.188, pedigree (4,5,5,5,5)
  (same comment as for Acetaldehyde)
- Toluene [air, urban air close to ground]: 0.00015224 kg; lognormal variance with pedigree 0.188, pedigree (4,5,5,5,5)
  (same comment as for Acetaldehyde)
- Toluene, 2-chloro [air, urban air close to ground]: 0.00020642 kg; lognormal variance with pedigree 0.188, pedigree (4,5,5,5,5)
  (same comment as for Acetaldehyde)
- Water [air, unspecified]: 0.131789 m3; name water_to_air_unspecified; = (water_decarbonised_input/1000*fraction_WDC_to_air)+(water_cooling_UNO_input*fraction_CW_to_air)+(water_salt_sole_input*fraction_PW_to_air); lognormal variance with pedigree 0.0487, pedigree (2,2,4,1,1)
  Calculated value based on literature values and expert opinion. See comments in the parametres' comment field.
  property fraction, origin: fresh water 0.000110126; name fraction_origin_fresh_water
  property fraction, origin: salt water 0.649082; name fraction_origin_salt_water
  property fraction, origin: unspecified 0.350808; name fraction_origin_unspecified
- Acetaldehyde [water, surface water]: 9.5262e-5 kg; lognormal variance with pedigree 0.448, pedigree (4,5,5,5,5)
  Estimation, assuming that the remaining amount of unreacted input materials leave the production process with the wastewater, wich is further treated in an internal wastewater plant.
  Uncertainty: Estimation
- Acetic acid [water, surface water]: 0.00040933 kg; lognormal variance with pedigree 0.448, pedigree (4,5,5,5,5)
  (same comment as for Acetaldehyde)
- Ammonium [water, surface water]: 0.0026559 kg; lognormal variance with pedigree 0.188, pedigree (4,5,5,5,5)
  Estimation, assuming that the remaining amount of unreacted input materials leave the production process with the wastewater, wich is further treated in an internal wastewater plant. For the nitrogen containing compounds within the wastewater a removal efficiency of 50% was assumed. The nitrogen emitted to air (N2) is neglected.
  Uncertainty: Estimation
- Aniline [water, surface water]: 0.0012586 kg; lognormal variance with pedigree 0.448, pedigree (4,5,5,5,5)
  (same comment as for Ammonium)
- Bromide [water, surface water]: 0.1147 kg; lognormal variance with pedigree 0.798, pedigree (4,5,5,5,5)
  (same comment as for Acetaldehyde)
- Calcium II [water, surface water]: 0.028325 kg; lognormal variance with pedigree 0.448, pedigree (4,5,5,5,5)
  (same comment as for Acetaldehyde)
- Carbonate [water, surface water]: 0.042487 kg; lognormal variance with pedigree 0.448, pedigree (4,5,5,5,5)
  (same comment as for Acetaldehyde)
- Chloride [water, surface water]: 0.4931 kg; lognormal variance with pedigree 0.448, pedigree (4,5,5,5,5)
  (same comment as for Acetaldehyde)
- Diethylamine [water, surface water]: 0.00055813 kg; lognormal variance with pedigree 0.448, pedigree (4,5,5,5,5)
  (same comment as for Ammonium)
- Dimethylamine [water, surface water]: 0.00022742 kg; lognormal variance with pedigree 0.448, pedigree (4,5,5,5,5)
  (same comment as for Ammonium)
- Dipropylamine [water, surface water]: 0.00035669 kg; lognormal variance with pedigree 0.448, pedigree (4,5,5,5,5)
  (same comment as for Ammonium)
- Ethanol [water, surface water]: 0.00084989 kg; lognormal variance with pedigree 0.448, pedigree (4,5,5,5,5)
  (same comment as for Acetaldehyde)
- Ethyl acetate [water, surface water]: 0.00059445 kg; lognormal variance with pedigree 0.448, pedigree (4,5,5,5,5)
  (same comment as for Acetaldehyde)
- Iodide [water, surface water]: 0.011206 kg; lognormal variance with pedigree 0.798, pedigree (4,5,5,5,5)
  (same comment as for Acetaldehyde)
- Lactic acid [water, surface water]: 0.00027941 kg; lognormal variance with pedigree 0.448, pedigree (4,5,5,5,5)
  (same comment as for Acetaldehyde)
- Methanol [water, surface water]: 0.00066302 kg; lognormal variance with pedigree 0.448, pedigree (4,5,5,5,5)
  (same comment as for Acetaldehyde)
- Phosphate [water, surface water]: 0.017195 kg; lognormal variance with pedigree 0.188, pedigree (4,5,5,5,5)
  (same comment as for Acetaldehyde)
- Sodium I [water, surface water]: 0.49799 kg; lognormal variance with pedigree 0.798, pedigree (4,5,5,5,5)
  (same comment as for Acetaldehyde)
- Sulfate [water, surface water]: 0.078969 kg; lognormal variance with pedigree 0.188, pedigree (4,5,5,5,5)
  (same comment as for Acetaldehyde)
- Sulfide [water, surface water]: 0.0026827 kg; lognormal variance with pedigree 0.188, pedigree (4,5,5,5,5)
  (same comment as for Acetaldehyde)
- Toluene [water, surface water]: 6.0897e-5 kg; lognormal variance with pedigree 0.448, pedigree (4,5,5,5,5)
  (same comment as for Acetaldehyde)
- Toluene, 2-chloro [water, surface water]: 0.00043206 kg; lognormal variance with pedigree 0.448, pedigree (4,5,5,5,5)
  (same comment as for Acetaldehyde)
- Water [water, unspecified]: 0.404835 m3; name water_to_water_unspecified; = (water_decarbonised_input/1000)*(1-fraction_WDC_to_air)+water_cooling_UNO_input*(1-fraction_CW_to_air)+water_salt_sole_input*(1-fraction_PW_to_air); lognormal variance with pedigree 0.0487, pedigree (2,2,4,1,1)
  (same comment as for Water)
  property carbon content, fossil 0; name C_content_fossil
  property carbon content, non-fossil 0; name C_content_non_fossil
  property fraction, origin: fresh water 5.66664e-5; name fraction_origin_fresh_water_Ww
  property fraction, origin: salt water 0.819432; name fraction_origin_salt_water_Ww
  property fraction, origin: unspecified 0.180511; name fraction_origin_unspecified_Ww
  property water in wet mass 1000 kg; name WWM

## Sampling procedure
Literature data

## Review by Thomas Nemecek 2010-03-08
automatic validation in Excel
none

## Review by Roland Hischier 2011-09-30
Transfer of documentation done.
