# venting of carbon dioxide, in chemical industry

Dataset: EcoSpold 2, unit process
Geography: GLO
Time period: 2020-01-01 to 2022-12-31
Technology level: current
Classification: ISIC rev.4 ecoinvent: 2011:Manufacture of basic chemicals
Classification: EcoSpold01Categories: chemicals/inorganics
Scenario: Business-as-Usual
System model: Allocation at the point of substitution
Generated by: Avraam Symeonidis
Database: ecoinvent
isCopyrightProtected: true

## General comment
This activity describes service of venting of carbon dioxide, in chemical industry into the atmosphere as an emission to air.

Carbon dioxide, in chemical industry is produced mainly as a by-product in ammonia production, where ammonia is the is produced as a reference product. This carbon dioxide is afterwards either vented directly into the atmosphere or collected and futher used in other chemical processes.
This dataset is meant to be used by users when they wish to model a direct emission of carbon dioxide produced in chemical industry and directly emmited to air. The amount of the emission should match the amount of the reference product produced in this activity.
Carbon dioxide, in chemical industry is produced mostly through ammonia production where a carbon containing fuel is burned during the process. In the majority of the cases this carbon dioxide represends a useful by-product and is collected to be further used in the industry

## Included activities end
This activity describes venting of carbon dioxide as an emission to air.

## Reference product
- venting of carbon dioxide, in chemical industry: 1 kg; By-product classification allocatable product; CPC 34210: Hydrogen, nitrogen, oxygen, carbon dioxide and rare gases; inorganic oxygen compounds of non-metals n.e.c.; CAS 124-38-9
  production volume 4.86919e10 kg
    Calculated from the production volume of carbon dioxide that is by produced from ammonia production and is not collected to be further utilised. The production volumes considers both technologies of ammonia production on the glabal scale.
  property price 0.0136878 EUR2005
    Calculated based on inputs: The price of the product has been calculated as a sum of the values of the material and energy inputs for this product. This value is therefore a rough estimation. It may underestimate the real price since there are additional expenses when producing any product. These expences can include for example labour costs, treatment of waste materials and profit for the producer. Please consider carefully whether this level of data quality is acceptable for your application.
  properties: carbon allocation 0 kg, carbon content 0

## Inputs from technosphere
- carbon dioxide, in chemical industry: 1 kg; lognormal variance with pedigree 0.0126, pedigree (3,4,4,1,1)
  properties: carbon content, fossil 0.272912, dry mass 1 kg, oxygen content 0.727088, wet mass 1 kg
  note on carbon content, fossil: Carbon content (on a dry matter basis) of carbon dioxide, in chemical industry is calculated from the molecular formula of the substance (CO2).
  note on oxygen content: Oxygen content (on a dry matter basis) of carbon dioxide, in chemical industry is calculated from the molecular formula of the substance (CO2).

## Emissions to nature
- Carbon dioxide, fossil [air, low population density, long-term]: 1 kg; lognormal variance with pedigree 0.052, pedigree (3,4,4,1,1)
