# ethanol production from rye

Dataset: EcoSpold 2, unit process
Geography: RoW
Time period: 2002-01-01 to 2022-12-31
Technology level: current
Classification: EcoSpold01Categories: biomass/fuels
Classification: ISIC rev.4 ecoinvent: 2011:Manufacture of basic chemicals
Tags: ConvertedDataset
Scenario: Business-as-Usual
System model: Allocation at the point of substitution
Share of production covered: 0 %
Generated by: Edgard Gnansounou
Published in: Jungbluth N. 2007
Database: ecoinvent
isCopyrightProtected: true

## General comment
Inventory refers to the production of 1 kg hydrated ethanol 95% (dry basis, i.e. 1.05 kg hydrated ethanol wet basis), respectively 1 kg of DDGS (wet basis) from rye grains. The multioutput-process 'rye, in distillery' delivers the co-products 'ethanol, 95% in H2O, from rye, at distillery' and 'DDGS, from rye, at distillery'. Economic allocation with allocation factor for common stages of 97.7% to ethanol. Allocation is done according to carbon balance for CO2 emissions.
[This dataset was already contained in the ecoinvent database version 2. It was not individually updated during the transfer to ecoinvent version 3. Life Cycle Impact Assessment results may still have changed, as they are affected by changes in the supply chain, i.e. in other datasets. This dataset was generated following the ecoinvent quality guidelines for version 2. It may have been subject to central changes described in the ecoinvent version 3 change report (http://www.ecoinvent.org/database/ecoinvent-version-3/reports-of-changes/), and the results of the central updates were reviewed extensively. The changes added e.g. consistent water flows and other information throughout the database. The documentation of this dataset can be found in the ecoinvent reports of version 2, which are still available via the ecoinvent website. The change report linked above covers all central changes that were made during the conversion process.]

## Included activities end
This dataset includes the transport of rye grains to the distillery, and the processing of rye grains to hydrated ethanol (95%) and DDGS (92% dry matter). System boundary is at the distillery. Dehydration to anhydrous ethanol is not included.

## Geography
Data is from the etha+ project (Alcosuisse, CH), adapted to RER context

## Technology
The process is similar to that of wheat-to-ethanol or yet dry-milling corn-to-ethanol. The production of DDGS from stillage includes separation of draff, concentration, drying and granulation. DDGS are used as animal feed.

## Time period
Data from 2002 to 2006, current technology for the production of ethanol from starch-based feedstocks

## Parameters
- fraction, cooling water, cooling pond system, to air: 0.032 dimensionless; lognormal variance with pedigree 0.0413, pedigree (2,3,1,3,1)
- fraction, cooling water, once-through system, to air: 0.004 dimensionless; lognormal variance with pedigree 0.0413, pedigree (2,3,1,3,1)
- fraction, cooling water, recirculating system, to air: 0.771 dimensionless; lognormal variance with pedigree 0.0413, pedigree (2,3,1,3,1)
- fraction, cooling water, to air: 0.3875 dimensionless; lognormal variance with pedigree 0.092025, pedigree (4,4,3,2,4)
- fraction, process water, to air: 0 dimensionless
- fraction, tap water, to air: 0 dimensionless

## Reference product
- ethanol, without water, in 95% solution state, from fermentation: 1 kg; name RP_amount_1; By-product classification allocatable product; CPC 35491: Biodiesel; CAS 64-17-5
  EcoSpold01Location=RER
  production volume 2.37312e7 kg
    Calculated based on literature values and estimates. The global production volume of ethanol (from renewable sources =bioethanol) is 4.5E10l/year (*0.79kg/l= 3.55E+10kg/year) (Source: F. O. Licht, "Ethanol: World Production, by Country," table, World Ethanol and Biofuels Report, vol. 4, no. 17 (9 May 2006), p. 395.). Bioethanol is produced mainly from sugar cane and different type of grains (FAO, http://www.fao.org/docrep/016/i3009e/i3009e02.pdf). Sweet sorghum, grass, potatoes and rye represent minority feedstock. Therefore it is estimated, that each represent 0.1% of the total production volume.
  property carbon content, non-fossil 0.521739
    Assumed to be like Distillers Grain Corn with Solubles. Composition data obtained from (http://beefmagazine.com/images/2009%20feed%20table.pdf). First, composition data were refered to 1 kg dry mass. Then, C-contents were calculated considering a C-content/dry mass of 46% in carbohydrates (including fibres), 53% in proteins and 75% in fats. All data from "Evolutionary and Biochemical Aspects", A.D. Kay and T. Vrede (in Global Ecology, 2010, Elsevier B.V., S.E. Jørgensen Ed.).
    C2H6O
  property heating value, net 28.1 MJ
    Based on literature, page 275, Report 17: Jungbluth, N., Chudacoff, M., Dauriat, A., Dinkel, F., Doka, G., Faist Emmenegger, M., Gnansounou, E., Kljun, N., Schleiss, K., Spielmann, M., Stettler, C., Sutter, J. 2007: Life Cycle Inventories of Bioenergy. ecoinvent report No. 17, Swiss Centre for Life Cycle Inventories, Dübendorf, CH.
  property price 0.324 EUR2005
    Temporary price data. Calculated as 90% of purchasers price based on: 2005 prices from FAPRI2007, 2009. Agricultural outlook. (http://www.fapri.missouri.edu/outreach/publications/ag_outlook.asp?current_page=outreach; accessed 22/06/10). Unit conversion from US gallon to kg - 1 gallon = 3.7856 liter * 0.789 kg/liter (ethanol density) = 2.9868 kg
  properties: carbon allocation 0.521739 kg, carbon content 0.521739, carbon content, fossil 0, dry mass 1 kg, water content 0, water in wet mass 0 kg, wet mass 1 kg

## Inputs from technosphere
- Distiller's Dried Grains with Solubles: -0.518794 kg; name BP_amount_1
  production volume
    Calculated from production volume of reference product using the relative outputs.
  properties: carbon content, non-fossil 0.4885, dry mass 0.92 kg, price 0.00365 EUR2005, water content 0.0869565, wet mass 1 kg
  note on carbon content, non-fossil: Assumed to be like Distillers Grain Corn with Solubles. Composition data obtained from (http://beefmagazine.com/images/2009%20feed%20table.pdf). First, composition data were refered to 1 kg dry mass. Then, C-contents were calculated considering a C-content/dry mass of 46% in carbohydrates (including fibres), 53% in proteins and 75% in fats. All data from "Evolutionary and Biochemical Aspects", A.D. Kay and T. Vrede (in Global Ecology, 2010, Elsevier B.V., S.E. Jørgensen Ed.).
- ammonium sulfate: 0.00437806 kg; lognormal variance with pedigree 0.0521, pedigree (1,2,5,5,1)
  EcoSpold01Location=RER
  Etha+ project Alcosuisse, industrial data
  Uncertainty: etha+ project Alcosuisse, industrial data
  properties: dry mass 1 kg, wet mass 1 kg
- electricity, medium voltage: 0.040823, 0.0127381, 0.00037934, 0.00193555, 0.116873, 0.00639279 kWh (6 suppliers, which the file names only by identifier); sum of these 0.179142 kWh; lognormal variance with pedigree 0.0521, pedigree (1,2,5,5,1)
  Etha+ project Alcosuisse, industrial data
  EcoSpold01Location=UCTE
  Uncertainty: etha+ project Alcosuisse, industrial data
- ethanol fermentation plant: 2.17107e-10 unit; lognormal variance with pedigree 0.3521, pedigree (1,2,5,5,1)
  EcoSpold01Location=CH
  Etha+ project Alcosuisse, industrial data
  Uncertainty: etha+ project Alcosuisse, industrial data
- heat, district or industrial, natural gas: 5.98358, 0.0983255 MJ (2 suppliers, which the file names only by identifier); sum of these 6.0819 MJ; lognormal variance with pedigree 0.0521, pedigree (1,2,5,5,1)
  Etha+ project Alcosuisse, industrial data
  EcoSpold01Location=RER
  Uncertainty: etha+ project Alcosuisse, industrial data
  properties: heating value, net 1 MJ
- inorganic nitrogen fertiliser, as N: 0.000399095, 3.75881e-5, 0.000103007, 4.56555e-6, 2.9323e-5, 1.07808e-5, 1.03125e-5, 8.59923e-6, 3.28084e-5, 1.08114e-5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 kg (28 suppliers, which the file names only by identifier); sum of these 0.00437806 kg; lognormal variance with pedigree 0.0521, pedigree (1,2,5,5,1)
  (same comment as for ammonium sulfate)
  properties: dry mass 1 kg, wet mass 1 kg
- rye grain: 1.46585 kg; lognormal variance with pedigree 0.0521, pedigree (1,2,5,5,1)
  (same comment as for ammonium sulfate)
  properties: carbon content, non-fossil 0.465305, dry mass 0.85 kg, water content 0.176471, wet mass 1 kg
  note on carbon content, non-fossil: Assumed to be like Distillers Grain Corn with Solubles. Composition data obtained from (http://beefmagazine.com/images/2009%20feed%20table.pdf). First, composition data were refered to 1 kg dry mass. Then, C-contents were calculated considering a C-content/dry mass of 46% in carbohydrates (including fibres), 53% in proteins and 75% in fats. All data from "Evolutionary and Biochemical Aspects", A.D. Kay and T. Vrede (in Global Ecology, 2010, Elsevier B.V., S.E. Jørgensen Ed.). Composition data obtained from Rye, in (http://www.nal.usda.gov/fnic/foodcomp/search/). First, composition data were refered to 1 kg dry mass. Then, C-contents were calculated considering a C-content/dry mass of 46% in carbohydrates (including fibres), 53% in proteins and 75% in fats. All data from "Evolutionary and Biochemical Aspects", A.D. Kay and T. Vrede (in Global Ecology, 2010, Elsevier B.V., S.E. Jørgensen Ed.).
- soda ash, light: 0.0164175 kg; lognormal variance with pedigree 0.0521, pedigree (1,2,5,5,1)
  (same comment as for heat, district or industrial, natural gas)
  properties: carbon content, fossil 0.0517241, dry mass 1 kg, heating value, net 3.43 MJ, wet mass 1 kg
- sulfuric acid: 0.0109451 kg; lognormal variance with pedigree 0.0521, pedigree (1,2,5,5,1)
  (same comment as for heat, district or industrial, natural gas)
  properties: dry mass 1 kg, wet mass 1 kg
- tap water: 0.00343848, 0.143294, 0.00568266, 0.0106036, 1.63979, 0.00372776, 0.0285652 kg (7 suppliers, which the file names only by identifier); sum of these 1.8351 kg; lognormal variance with pedigree 0.0521, pedigree (1,2,5,5,1)
  (same comment as for heat, district or industrial, natural gas)
  properties: carbon content, fossil 0.00178991, dry mass 0.000337476 kg, water content 2962.17, wet mass 1 kg
  note on carbon content, fossil: Bicarbonate content is 2.93 mol/m3. CO2 content is 0.1 mol/m3 (ecoinvent v2.2 report 8, Tab 93.1).
- transport, tractor and trailer, agricultural: 0.0146585 metric ton*km; lognormal variance with pedigree 0.1721, pedigree (1,2,5,5,1)
  (same comment as for ethanol fermentation plant)
- wastewater, average: -4.60081e-6, -0.00129222 m3 (2 suppliers, which the file names only by identifier); sum of these -0.00129682 m3
  EcoSpold01Location=CH
  Etha+ project Alcosuisse, industrial data
  production volume
    Calculated from the production volume of ethanol, without water, in 95% solution state, from fermentation in proportion to the respective output amounts.
  properties: carbon content, non-fossil 0.194039, dry mass 0.346837 kg, mass concentration, TOC 0.1091 kg/m3, mass concentration, calcium 0.039453 kg/m3, mass concentration, chlorine 0.030031 kg/m3, mass concentration, hydrogen 0.013365 kg/m3, mass concentration, nitrogen 0.031015 kg/m3, mass concentration, oxygen 0.069824 kg/m3, mass concentration, sodium 0.06456 kg/m3, mass concentration, sulfur 0.015602 kg/m3, water content 2882.2, wet mass 1000 kg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
  note on carbon content, non-fossil: 0.0673 kg TOC/m3 (Tab A.17, ecoinvent v2.2 report 13_I). TOC was considered as Total Carbon.

## Inputs from nature
- Carbon dioxide, in air [natural resource, in air]: 0.628206 kg; lognormal variance with pedigree 0.042, pedigree (1,1,5,5,1)
  Calculation, to close carbon balance
  Uncertainty: Calculation, to close carbon balance
- Water, cooling, unspecified natural origin [natural resource, in water]: 5.50305e-5 m3
  property carbon content, fossil 0.0104329; name C_content_fossil
  property carbon content, non-fossil 0; name C_content_non_fossil
  property dry mass 0.1101 kg; name DM
  property water content 9081.65; name water_content
  property water in wet mass 999.89 kg; name WWM

## Emissions to nature
- Carbon dioxide, non-fossil [air, urban air close to ground]: 1.07013 kg; lognormal variance with pedigree 0.042, pedigree (1,1,5,5,1)
  Calculation, to close carbon balance
  Uncertainty: Calculation, to close carbon balance
- Water [air, unspecified]: 2.13243e-5 m3; lognormal variance with pedigree 0.0827, pedigree (2,2,5,5,1)
  Calculated value based on literature values and expert opinion. See comments in the parametres' comment field.
- Water [water, unspecified]: 0.000571982 m3; lognormal variance with pedigree 0.0827, pedigree (2,2,5,5,1)
  (same comment as for Water)

## Sampling procedure
Data is from the etha+ project (Alcosuisse, CH), technology by French ethanol plant supplier, modelling by ENERS (CH)

## Extrapolations
none This dataset has been copied from an original dataset covering the geography RER. The uncertainty has been adjusted accordingly.

## Review by Niels Jungbluth 2006-08-15
Passed.
none

## Review by Emilia Moreno Ruiz 2012-03-19
name change from "Distiller's Dried Grains with Solubles, from rye" to "Distiller's Dried Grains with Solubles"
