# transport, tractor and trailer, agricultural

Dataset: EcoSpold 2, unit process
Geography: RoW
Time period: 1991-01-01 to 2022-12-31
Technology level: current
Classification: EcoSpold01Categories: agricultural means of production/work processes
Classification: ISIC rev.4 ecoinvent: 0161:Support activities for crop production
Tags: ConvertedDataset
Scenario: Business-as-Usual
System model: Allocation at the point of substitution
Generated by: Silvio Blaser
Published in: Nemecek, T. 2007
Database: ecoinvent
isCopyrightProtected: true

## General comment
Heavy road transport and 2 tyre-trailers of max. 8t loading capacity either. Mean velocity when loaded = 15 km/h. Mean velocity when empty = 25 km/h. deadhead (over the same distance) included. Transported goods not included. FU is one t of good transported for one km.
[This dataset was already contained in the ecoinvent database version 2. It was not individually updated during the transfer to ecoinvent version 3. Life Cycle Impact Assessment results may still have changed, as they are affected by changes in the supply chain, i.e. in other datasets. This dataset was generated following the ecoinvent quality guidelines for version 2. It may have been subject to central changes described in the ecoinvent version 3 change report (http://www.ecoinvent.org/database/ecoinvent-version-3/reports-of-changes/), and the results of the central updates were reviewed extensively. The changes added e.g. consistent water flows and other information throughout the database. The documentation of this dataset can be found in the ecoinvent reports of version 2, which are still available via the ecoinvent website. The change report linked above covers all central changes that were made during the conversion process.]

## Included activities end
The inventory takes into account the diesel fuel consumption and the amount of agricultural machinery and of the shed, which has to be attributed to the road transport of goods, with a tractor and two tyre trailers, (goods were not considered). Also taken into consideration is the amount of emissions and heat waste to the air from combustion and the emission to the soil from tyre abrasion during the transport. The following activities where considered part of the work process: preliminary work at the plant, like attaching the trailer to the tractor; road transport for 1 km and concluding work, like uncoupling the machine. Not included are dust other than from combustion and noise.

## Geography
The inventories are based on measurements made by the FAT, in Switzerland.

## Technology
Emissions and fuel consumption by the newest models of tractors set into operation during the period from 1999 to 2001.

## Time period
Measurements were made in the last few years (1999-2001).

## Reference product
- transport, tractor and trailer, agricultural: 1 metric ton*km; By-product classification allocatable product; CPC 86119: Other support services to crop production
  EcoSpold01Location=CH
  production volume 3.70015e10 metric ton*km
    Based on 9 million trailers at 80 hours at 15km/h and 3440 kgkm/km (load factor 43% of 8000 kg)
  property price 0.114502 EUR2005
    Calculated based on inputs: The price of the product has been calculated as a sum of the values of the material and energy inputs for this product. This value is therefore a rough estimation. It may underestimate the real price since there are additional expenses when producing any product. These expences can include for example labour costs, treatment of waste materials and profit for the producer. Please consider carefully whether this level of data quality is acceptable for your application.
  properties: carbon allocation 0 kg, carbon content 0

## Inputs from technosphere
- agricultural trailer: 0.0242 kg; lognormal variance with pedigree 0.044, pedigree (1,4,5,5,1)
  EcoSpold01Location=CH
- diesel: 0.00319509, 0.00158312, 0.000323481, 0.00664846, 0.000223803, 0.0315499, 7.6107e-5 kg (7 suppliers, which the file names only by identifier); sum of these 0.0436 kg; lognormal variance with pedigree 0.044, pedigree (1,4,5,5,1)
  EcoSpold01Location=CH
  properties: carbon content, fossil 0.865, dry mass 1 kg, heating value, net 42.8 MJ, wet mass 1 kg
  note on carbon content, fossil: C-content of diesel is 86.5% (ecoinvent v2.2 report 6_IV, Tab 3.14)
- shed: 8.13e-5 m2; lognormal variance with pedigree 0.344, pedigree (1,4,5,5,1)
  EcoSpold01Location=CH
- tractor, 4-wheel, agricultural: 0.00365 kg; lognormal variance with pedigree 0.044, pedigree (1,4,5,5,1)
  EcoSpold01Location=CH

## Emissions to nature
- Ammonia [air, non-urban air or from high stacks]: 8.72e-7 kg; lognormal variance with pedigree 0.1001, pedigree (1,2,5,5,3)
- Benzene [air, non-urban air or from high stacks]: 3.18e-7 kg; lognormal variance with pedigree 0.1001, pedigree (1,2,5,5,3)
- Benzo(a)pyrene [air, non-urban air or from high stacks]: 1.31e-9 kg; lognormal variance with pedigree 0.7001, pedigree (1,2,5,5,3)
- Cadmium II [air, non-urban air or from high stacks]: 4.36e-10 kg; lognormal variance with pedigree 0.7001, pedigree (1,2,5,5,3)
- Carbon dioxide, fossil [air, non-urban air or from high stacks]: 0.136 kg; lognormal variance with pedigree 0.0601, pedigree (1,2,5,5,3)
- Carbon monoxide, fossil [air, non-urban air or from high stacks]: 0.000256 kg; lognormal variance with pedigree 0.694, pedigree (1,4,5,5,1)
- Chromium III [air, non-urban air or from high stacks]: 2.18e-9 kg; lognormal variance with pedigree 0.7001, pedigree (1,2,5,5,3)
- Copper ion [air, non-urban air or from high stacks]: 7.41e-8 kg; lognormal variance with pedigree 0.7001, pedigree (1,2,5,5,3)
- Dinitrogen monoxide [air, non-urban air or from high stacks]: 5.23e-6 kg; lognormal variance with pedigree 0.1001, pedigree (1,2,5,5,3)
- Methane, fossil [air, non-urban air or from high stacks]: 5.63e-6 kg; lognormal variance with pedigree 0.1001, pedigree (1,2,5,5,3)
- NMVOC, non-methane volatile organic compounds [air, non-urban air or from high stacks]: 9.35e-5 kg; lognormal variance with pedigree 0.084, pedigree (1,4,5,5,1)
- Nickel II [air, non-urban air or from high stacks]: 3.05e-9 kg; lognormal variance with pedigree 0.7001, pedigree (1,2,5,5,3)
- Nitrogen oxides [air, non-urban air or from high stacks]: 0.0017 kg; lognormal variance with pedigree 0.084, pedigree (1,4,5,5,1)
- PAH, polycyclic aromatic hydrocarbons [air, non-urban air or from high stacks]: 1.43e-7 kg; lognormal variance with pedigree 0.3601, pedigree (1,2,5,5,3)
- Particulate Matter, < 2.5 um [air, non-urban air or from high stacks]: 0.000214 kg; lognormal variance with pedigree 0.3601, pedigree (1,2,5,5,3)
- Selenium IV [air, non-urban air or from high stacks]: 4.36e-10 kg; lognormal variance with pedigree 0.1001, pedigree (1,2,5,5,3)
- Sulfur dioxide [air, non-urban air or from high stacks]: 4.4e-5 kg; lognormal variance with pedigree 0.0601, pedigree (1,2,5,5,3)
- Zinc II [air, non-urban air or from high stacks]: 4.36e-8 kg; lognormal variance with pedigree 0.7001, pedigree (1,2,5,5,3)
- Cadmium II [soil, agricultural]: 7.8e-9 kg; lognormal variance with pedigree 0.084, pedigree (1,4,5,5,1)
- Lead II [soil, agricultural]: 3.43e-8 kg; lognormal variance with pedigree 0.084, pedigree (1,4,5,5,1)
- Zinc II [soil, agricultural]: 2.1e-5 kg; lognormal variance with pedigree 0.084, pedigree (1,4,5,5,1)

## Sampling procedure
The inventoried HC, NOx, CO and fuel consumption values are measurements made following two test cycles (ISO 8178 C1 test and a specific 6-level-test created by the FAT) and on measurements made during the field work. The other emissions were calculated basing on literature data and the measured fuel consumption.

## Extrapolations
Values given in the reference are representative for the chosen work processes. Processes are typical procedures for Switzerland around the year 2000, they are not statistical average processes. This dataset has been copied from an original dataset covering the geography CH. The uncertainty has been adjusted accordingly.

## Review by Roland Hischier 2003-08-06
Passed.
