# treatment of condensate from light oil boiler, wastewater treatment

Dataset: EcoSpold 2, unit process
Geography: RoW
Time period: 2010-01-01 to 2022-12-31
Technology level: current
Classification: ISIC rev.4 ecoinvent: 3700:Sewerage
Scenario: Business-as-Usual
System model: Allocation at the point of substitution
Generated by: Nikolia Stoikou
Database: ecoinvent
isCopyrightProtected: true

## General comment
This dataset represents the treatment of a wastewater, generated from an ordinary transforming activity. Purification in wastewater treatment of 'condensate from light oil boiler'. Recommended use of this dataset: to be used for wastewaters, generated from ordinary transforming activities, of equal or similar composition. The wastewater has a content of TOC: 0.025 kg/m3, COD: 0.09747 kg/m3 and BOD: 0.04714 kg/m3. TOC is equal to C present in the wastewater, COD is calculated as TOC/0.2565 and BOD is calculated as COD/0.53034. Detailed elemental composition can be found in the properties of the wastewater treated. Share of biogenic carbon in the sludge: 0%.

## Included activities start
The activity starts with the wastewater being available at the gate of the treatment facility. Collection and transportation of the wastewater to the treatment plant is not included.

## Included activities end
The activity ends with the wastewater being treated and waste-specific emissions released to the environment. Expenditures from treatment of wastewater in waste treatment plant are included as well as relevant infrastructure of the plant. Emissions from any sludge digestion, biogas generation and utilization (heeding specific wastewater composition) are also included. Waste-specific direct emissions of untreated wastewater and required territory-specific infrastructure for sewers are not contained within this dataset but instead in the regional market datasets for this wastewater.

## Geography
The site has mean annual temperature (MAT) of 16.743579766537 degC, mean annual precipitation (MAP) of 1250.84108527132 mm/year, mean annual actual evaporation (EAT) of 460.58904958214 mm/year. In the WWT plant, 0% of its water input are lost due to evaporation from pools, 0.00123% of water is *gained* from organic mass degradation, and 0.00215% is removed off site via sludge disposal. (References: UN data, 2020. Precipitation, Environment Statistics Database, United Nations Statistics Division Available at: http://data.un.org/Data.aspx?q=precipitation&d=ENV&f=variableID%3a6; World Bank, 2022. Surface area (sq.km), World Bank Group Available at: https://data.worldbank.org/indicator/AG.SRF.TOTL.K2; Doka G.,2021. A model for composition-specific life cycle inventories of regionalised wastewater fates, Zurich, Switzerland. http://www.doka.ch/publications.htm)

## Technology
This is an inventory for the disposal of a selected wastewater in Global. The reference unit is 1 m3 wastewater input. This activity represents the treatment of a specific wastewater in a WWT plant (while direct emissions and sewering are heeded in the upstream market dataset for this wastewater). The size of the treatment plant infrastructure is for a supranational region average territory situation. The assumed size of the WWTP treats 82.2 Mio m3 per year. The mixture of WWTP with one, two, or three stages is 8.2%-41.2%-50.6%. The actual, waste-specific oxygen requirement in the biological stages is 0.012420065 kg O. The digestion process produces 2.741907 litres of biogas with an energy content of 0.06105876MJ. 60.5% of the biogas is utilized for energy. The remainder is flared. The gross electric efficiency is 26.564%. The gross thermal efficiency is 47.853%. After digestion, the remaining total sludge mass (dry matter) is 0.03786kg DM.

## Reference product
- iron scrap, sorted, pressed: 1 kg; By-product classification Recyclable; CPC 39310: Slag, dross, scalings and other waste from the manufacture of iron or steel; lognormal variance with pedigree 0.3611, pedigree (1,1,1,1,1)
  scrap output from used infrastructure for wastewater treatment plant.
  Uncertainty: Uncertainty calculated from wastewater technosphere fate uncertainty and treatment infrastructure uncertainty.
  production volume 12962.7 kg
    Calculated in proportion to wastewater reference product.
  property price 0.175 EUR2005
    Temporary price data. Calculated as 90% of purchasers price based on: 2005 import and export prices (total trades (USD) divided by total weight (kg) in biggest economies of the world: EU27, USA, Brasil, China, India, Japan and Russia) from UN Commodity Trade Statistics Database (http://data.un.org/Explorer.aspxDatabase [Accessed 2011.06.20]). Commodity: Waste or scrap, of cast iron
  properties: carbon allocation 0 kg, carbon content 0, carbon content, fossil 0, carbon content, non-fossil 0, dry mass 1 kg, water content 0, water in wet mass 0 kg, wet mass 1 kg

## Inputs from technosphere
- chimney: 1.33755e-5 m
- condensate from light oil boiler: -0.000162387 m3
- electricity, low voltage: 0.00146238, 0.00289809, 0.0278393, 0.000496611, 0.00994967, 9.03107e-5, 0.000727887 kWh (7 suppliers, which the file names only by identifier); sum of these 0.0434642 kWh
- hazardous waste, for incineration: -6.73639e-5, -1.14735e-6 kg (2 suppliers, which the file names only by identifier); sum of these -6.85113e-5 kg
- light fuel oil: 0.324462, 0.0064749, 0.0322054, 0.0030966, 0.00230129, 0.00213711, 0.0159572 kg (7 suppliers, which the file names only by identifier); sum of these 0.386635 kg
- oil boiler, 100kW: 5.45928e-7 unit
- oil boiler, 10kW: 5.45928e-6 unit
- oil storage, 3000l: 5.09534e-6 unit

## Emissions to nature
- Acetaldehyde [air, urban air close to ground]: 3.38429e-7 kg
- Acetone [air, urban air close to ground]: 8.25437e-7 kg
- Acrolein [air, urban air close to ground]: 1.89851e-7 kg
- Benzaldehyde [air, urban air close to ground]: 9.90524e-8 kg
- Benzene [air, urban air close to ground]: 3.30175e-7 kg
- Butane [air, urban air close to ground]: 2.47631e-6 kg
- Carbon dioxide, fossil [air, urban air close to ground]: 1.22165 kg
- Carbon monoxide, fossil [air, urban air close to ground]: 0.000136197 kg
- Copper ion [air, urban air close to ground]: 6.6035e-9 kg
- Dinitrogen monoxide [air, urban air close to ground]: 1.15561e-5 kg
- Dioxins, measured as 2,3,7,8-tetrachlorodibenzo-p-dioxin [air, urban air close to ground]: 9.40998e-16 kg
- Ethane [air, urban air close to ground]: 3.30175e-7 kg
- Ethylene [air, urban air close to ground]: 8.25437e-7 kg
- Ethyne [air, urban air close to ground]: 1.65087e-7 kg
- Formaldehyde [air, urban air close to ground]: 9.90524e-8 kg
- Hydrocarbons, aliphatic, alkanes, unspecified [air, urban air close to ground]: 4.12719e-6 kg
- Hydrocarbons, aliphatic, unsaturated [air, urban air close to ground]: 3.30175e-7 kg
- Hydrocarbons, aromatic [air, urban air close to ground]: 3.30175e-7 kg
- Hydrogen fluoride [air, urban air close to ground]: 7.42893e-8 kg
- Mercury II [air, urban air close to ground]: 8.25437e-9 kg
- Methane, fossil [air, urban air close to ground]: 3.30175e-6 kg
- Nitrogen oxides [air, urban air close to ground]: 0.00045399 kg
- PAH, polycyclic aromatic hydrocarbons [air, urban air close to ground]: 7.59402e-9 kg
- Particulate Matter, < 2.5 um [air, urban air close to ground]: 8.25437e-6 kg
- Pentane [air, urban air close to ground]: 1.65087e-6 kg
- Propanal [air, urban air close to ground]: 9.90524e-8 kg
- Propane [air, urban air close to ground]: 4.95262e-7 kg
- Propene [air, urban air close to ground]: 3.30175e-7 kg
- Sulfur dioxide [air, urban air close to ground]: 0.000753938 kg
- Toluene [air, urban air close to ground]: 1.65087e-7 kg
- Zinc II [air, urban air close to ground]: 8.25437e-9 kg
