# folpet production

Dataset: EcoSpold 2, unit process
Geography: RER
Time period: 2000-01-01 to 2022-12-31
Technology level: current
Classification: ISIC rev.4 ecoinvent: 2021:Manufacture of pesticides and other agrochemical products
Synonyms: Faltan; Folpel; Orthophaltan; Phthaltan
Scenario: Business-as-Usual
System model: Allocation at the point of substitution
Share of production covered: 100 %
Generated by: Jürgen Sutter
Published in: Nemecek, T. 2007
Database: ecoinvent
isCopyrightProtected: true

## General comment
This dataset represents the production of 1 kg of folpet from fluorspar and sulphuric acid. Folpet is the ISO common name for N-(trichloromethylthio)phthalimide or N-(trichloromethanesulfenyl)phthalimide (IUPAC, both). Folpet belongs to the class of phthalimide fungicides such as captan or captafol. Folpet is a contact fungicide and inhibits many oxidative enzymes, carboxylases and enzymes involved with phosphate metabolism and citrate synthesis. It is used to control fungal pathogens such as mildew, leaf spot and apple scab.
Raw materials are modelled with a stoichiometric calculation. Energy consumption is modelled with data from a similar process. The emissions are estimated. Water consumption is approximated based on data from a large chemical factory (Gendorf 2016).
References:
European Food Safety Authority (2009) Peer review of the pesticide risk assessment of the active substance folpet.
University of Hertfordshire. Pesticide Properties Database, folpet, http://sitem.herts.ac.uk/aeru/iupac/Reports/354.htm (last accessed on 2017-01-03).
Gendorf (2016) Umwelterklärung 2015, Werk Gendorf Industriepark, www.gendorf.de.

## Included activities start
From reception of raw materials at the factory gate.

## Included activities end
This activity ends with the production of folpet. The dataset includes the input materials, energy use, infrastructure and emissions.

## Geography
The inventory is modelled for Europe. Some values are based on data from a large chemical factory located in Germany. These are assumed to be valid for this geography.

## Technology
Folpet is a pesticide produced in two steps from phthalic anhydride:
C8H4O3 + 2 NH3 → C8H5NO2 + 3 H2O
C8H5NO2 + CCl4S → C9H4Cl3NO2S + HCl
A precursor that is used for the folpet production is perchloromethylmercaptan (CCl4S).
Perchloromethylmercaptan (CCl4S) is produced from carbon disulfide and chlorine:
CS2 + 2 Cl2 → CCl4S + S
The formed sulfur is oxidised to SO2 with oxygen from air. The formed SO2 is then scraped with quicklime and emitted as calcium and sulfate (oxidised formed sulfite by oxygen from air).

## Time period
Time of publications. Some values are based on data published by the Gendorf factory that were collected between 2011 and 2015. The time period has been adjusted accordingly. For more details, see the comments of the exchanges.

## Reference product
- folpet: 1 kg; name RP; By-product classification allocatable product; CPC 34662: Fungicides; CAS 133-07-3
  Folpet consists of white crystals which are practically insoluble in water and slightly soluble in organic solvents.
  The name 'folpel' is used in France.
  Folpet is used as a foliar fungicide on grapevines, fruit trees, and vegetables, and is active against a wide range of diseases including downy mildew, leaf spot, powdery mildew, and rust as well as black rot and dead arm of grapes.'
  production volume 0.696 kg
    This is a placeholder value that does not reflect real-world production volumes. This dataset does not currently require a real-world production volume to work in the database framework, and no actual data were collected yet. This has no negative effect on the results of the ecoinvent database. The placeholder value of this activity was estimated by scaling the global production volume (which is also a placeholder value) according to the sales of chemicals products reported by Cefic (European Chemical Industry Council), and the American Chemistry Council.
    According to Cefic (2016) the global sales of chemicals in the year 2015 was 3 534 billion euros. The reported share of sales per region are: EU28 14.7%; Other Europe (Switzerland, Norway, Turkey, Russia and Ukraine) 2.7%; NAFTA (US, Canada and Mexico) 16.5%; Latin America 3.8%; China 39.9%; Japan 3.9%; Republic of Korea 3.2%; India 2.2%; Rest of Asia 11.9%; Rest of the World 1.3%. Cefic also reports the US total sales, which amount to 518.7 billion euros out of the global 3 534 billion euros (14.7%). The same share is reported by the American Chemistry Council (2016), according to which the USA sales account for 15% of global sales for the year 2016.
    References:
    Cefic 2016. Facts and figures 2016 of the European chemical industry. Accessible at: http://www.cefic.org/Facts-and-Figures/Chemicals-Industry-Profile/
    American Chemistry Council 2016. Outlook: U.S. Chemical Industry Continues to Outpace Industrial Output; Accounts for More Than One-Half of Construction Spending by Manufacturing Sector. Accessible at: https://www.americanchemistry.com/Media/PressReleasesTranscripts/ACC-news-releases/US-Chemical-Industry-Continues-to-Outpace-Industrial-Output.html
  property carbon content, fossil 0.363636
    C9H4Cl3NO2S, MW=297 g/mol (ecoinvent v2.2 report Sutter 2010)
  property price 3.4 EUR2005
    Calculated after Alibaba. Source: http://www.alibaba.com/product-detail/Factory-supply-95-TC-50-WP_60297826028.html
  properties: carbon allocation 0.363636 kg, carbon content 0.363636, carbon content, non-fossil 0, dry mass 1 kg, water content 0, water in wet mass 0 kg, wet mass 1 kg

## Inputs from technosphere
- ammonia, anhydrous, liquid: 0.12771 kg; lognormal variance with pedigree 0.0362, pedigree (4,5,2,1,1)
  Stoichiometric calculation, assuming an efficiency of 95% per reaction step.
  Uncertainty: S
  properties: dry mass 1 kg, wet mass 1 kg
- carbon disulfide: 0.28546 kg; lognormal variance with pedigree 0.0362, pedigree (4,5,2,1,1)
  Stoichiometric calculation, assuming an efficiency of 95% per reaction step
  Uncertainty: S
  properties: carbon content, fossil 0.157895, dry mass 1 kg, heating value, net 32.72 MJ, wet mass 1 kg
- chemical factory, organics: 8.7814e-10 unit; lognormal variance with pedigree 0.309425, pedigree (2,3,2,2,3)
  Calculated based on literature data published by the industry. For this activity, no information was readily available concerning infrastructure and land-use. Therefore, the infrastructure is estimated based on data from two chemical factories, the BASF site of Ludwigshafen and the chemical factory in Gendorf (which are both located in Germany), which produce a wide range of chemical substances. Based on this data, the following assumptions are made: the built area amounts to about 4.2 ha, the plant has an average output of 50'000 t/a and a lifespan of fifty years. The estimated infrastructure amount is therefore 4.00 E-10 units per kg of produced chemical. Furthermore, for this dataset, the infrastructure amount is accounted for each production step. This may be an overestimation in some multistep syntheses.
  References:
  Althaus H.-J., Chudacoff M., Hischier R., Jungbluth N., Osses M. and Primas A. (2007) Life Cycle Inventories of Chemicals. ecoinvent report No. 8, v2.0. EMPA Dübendorf, Swiss Centre for Life Cycle Inventories, Dübendorf, CH.
  Gendorf (2000) Umwelterklärung 2000, Werk Gendorf. Werk Gendorf, Burgkirchen.'
- chlorine, liquid: 0.52585 kg; lognormal variance with pedigree 0.0362, pedigree (4,5,2,1,1)
  (same comment as for ammonia, anhydrous, liquid)
  properties: dry mass 1 kg, wet mass 1 kg
- electricity, medium voltage: 0.766537 kWh; lognormal variance with pedigree 0.0362, pedigree (4,5,2,1,1)
  Estimation, assuming a default value, originated from the calculation of an average consumption of electricity and heat per kg of product (3.2 MJ/kg), and a resulting amount of electricity of 0.333 kWh for every reaction step per kg reaction product, considering that the demand is made up of a mix that includes 38% electricity. Additionally, reaction steps are approximated with energy consumption data, assuming that inventory flows can be estimated using process data for basic operation steps, available for specific organic chemicals.
  Further references:
  Kim S., Overcash M.: Energy in chemical manufacturing processes: gate-to-gate information for life cycle assessment. In: Journal of Chemical Technology & Biotechnology vol. 78, no. 9: 995-1005(11). 2003
  Uncertainty: E
- heat, district or industrial, natural gas: 3.33693 MJ; lognormal variance with pedigree 0.0362, pedigree (4,5,2,1,1)
  Estimation, assuming a default value, originated from the calculation of an average consumption of electricity and heat per kg of product (3.2 MJ/kg), and a resulting amount of heat of 2 MJ for every reaction step per kg reaction product, considering that the demand is made up of a mix that includes 50% natural gas. Additionally, reaction steps are approximated with energy consumption data, assuming that inventory flows can be estimated using process data for basic operation steps, available for specific organic chemicals.
  Further references:
  Kim S., Overcash M.: Energy in chemical manufacturing processes: gate-to-gate information for life cycle assessment. In: Journal of Chemical Technology & Biotechnology vol. 78, no. 9: 995-1005(11). 2003
  Uncertainty: E
  properties: heating value, net 1 MJ
- heat, district or industrial, other than natural gas: 1.86253 MJ; lognormal variance with pedigree 0.0362, pedigree (4,5,2,1,1)
  Estimation, assuming a default value, originated from the calculation of an average consumption of electricity and heat per kg of product (3.2 MJ/kg), and a resulting amount of heat of 2 MJ for every reaction step per kg reaction product, considering that the demand is made up of a mix that includes 12% steam from external energy sources. Additionally, reaction steps are approximated with energy consumption data, assuming that inventory flows can be estimated using process data for basic operation steps, available for specific organic chemicals.
  Further references:
  Kim S., Overcash M.: Energy in chemical manufacturing processes: gate-to-gate information for life cycle assessment. In: Journal of Chemical Technology & Biotechnology vol. 78, no. 9: 995-1005(11). 2003
  Uncertainty: E
  properties: heating value, net 1 MJ
- phthalic anhydride: 0.53888 kg; lognormal variance with pedigree 0.0362, pedigree (4,5,2,1,1)
  (same comment as for ammonia, anhydrous, liquid)
  properties: carbon content, fossil 0.648649, dry mass 1 kg, heating value, net 22.93 MJ, wet mass 1 kg
- quicklime, milled, loose: 0.199018 kg
  Estimation, based on flue gas desulfurisation with quicklime.
  properties: dry mass 0.99 kg, water content 0.010101, wet mass 1 kg
- sodium hydroxide, without water, in 50% solution state: 0.13559 kg; lognormal variance with pedigree 0.0362, pedigree (4,5,2,1,1)
  Stoichiometric calculation, assuming an efficiency of 100%.
  Uncertainty: S
  properties: dry mass 1 kg, heating value, net 3.03 MJ, wet mass 1 kg
- tap water: 0.0570797 kg; lognormal variance with pedigree 0.010025, pedigree (2,3,2,2,3)
  Calculated based on literature data published by the industry. This value is a 5-year average of data (2011 - 2015) published by the Gendorf factory (Gendorf, 2016, Umwelterklärung, www.gendorf.de), (Gendorf, 2015, Umwelterklärung, www.gendorf.de), (Gendorf, 2014, Umwelterklärung, www.gendorf.de). The amount of tap water per kg of chemical substance produced is calculated using literature data published by the Gendorf factory based in Germany, which produces a wide range of chemical substances. The factory produced 1657400 tonnes of chemical substances in the year 2015 (Gendorf, 2016, Umwelterklärung, www.gendorf.de) and 740000 tonnes of intermediate products. The amount of tap water consumed in the year 2015 was 55100 tonnes (Gendorf, 2016, Umwelterklärung, www.gendorf.de). The resulting amount of tap water is 0.023 kg/kg of chemical product produced. The 5-year average (2011 - 2015, weighted by production volume) is 0.026 kg/kg. Furthermore, for this dataset, the tap water consumption is accounted for each production step. Furthermore, for this dataset, the amount is accounted for each production step. This may be an overestimation in some multistep syntheses.
  properties: carbon content, fossil 0.00178991, dry mass 0.000337476 kg, water content 2962.17, wet mass 1 kg
  note on carbon content, fossil: Bicarbonate content is 2.93 mol/m3. CO2 content is 0.1 mol/m3 (ecoinvent v2.2 report 8, Tab 93.1).
- wastewater, average: -1.45315e-7, -5.7822e-6 m3 (2 suppliers, which the file names only by identifier); sum of these -5.92751e-6 m3; lognormal variance with pedigree 0.009825, pedigree (2,3,1,2,3)
  Calculated based on literature data published by the industry. This value is a 5-year average of data (2011 - 2015) published by the Gendorf factory (Gendorf, 2016, Umwelterklärung, www.gendorf.de), (Gendorf, 2015, Umwelterklärung, www.gendorf.de), (Gendorf, 2014, Umwelterklärung, www.gendorf.de). The amount of wastewater (which is later on treated in the municipal WWTP) per kg of chemical substance produced is calculated using literature data published by the Gendorf factory based in Germany, which produces a wide range of chemical substances. The factory produced 1657400 tonnes of chemical substances in the year 2015 (Gendorf, 2016, Umwelterklärung, www.gendorf.de) and 740000 tonnes of intermediate products. The amount of wastewater which is later on treated in the municipal WWTP in the year 2015 was 1200 tonnes (Gendorf, 2016, Umwelterklärung, www.gendorf.de). The resulting amount of wastewater is 2.7E-06 m3/kg of chemical product produced. Furthermore, for this dataset, the amount is accounted for each production step. This may be an overestimation in some multistep syntheses.
  production volume
    Calculated from the production volume of folpet in proportion to the respective output amounts.
  properties: carbon content, non-fossil 0.194039, dry mass 0.346837 kg, water content 2882.2, wet mass 1000 kg
  note on carbon content, non-fossil: 0.0673 kg TOC/m3 (Tab A.17, ecoinvent v2.2 report 13_I). TOC was considered as Total Carbon.

## Inputs from nature
- Water, cooling, unspecified natural origin [natural resource, in water]: 0.0360041 m3; name water_cooling_UNO_input; source Gendorf 2000; lognormal variance with pedigree 0.010025, pedigree (2,3,2,2,3)
  Calculated based on literature data published by the industry. This value is a 5-year average of data (2011 - 2015) published by the Gendorf factory (Gendorf, 2016, Umwelterklärung, www.gendorf.de), (Gendorf, 2015, Umwelterklärung, www.gendorf.de), (Gendorf, 2014, Umwelterklärung, www.gendorf.de). The amount of water for cooling extracted per kg of chemical substance produced is calculated using literature data published by the Gendorf factory based in Germany, which produces a wide range of chemical substances. The factory produced 1657400 tonnes of chemical substances in the year 2015 (Gendorf, 2016, Umwelterklärung, www.gendorf.de) and 740000 tonnes of intermediate products. The reported amounts of water extracted as groundwater and surface water (river) are assumed to be used entirely for cooling purposes. Furthermore, for this dataset, the amount is accounted for each production step. This may be an overestimation in some multistep syntheses.
- Water, river [natural resource, in water]: 0.00188802 m3; lognormal variance with pedigree 0.010025, pedigree (2,3,2,2,3)
  Calculated based on literature data published by the industry. This value is a 5-year average of data (2011 - 2015) published by the Gendorf factory (Gendorf, 2016, Umwelterklärung, www.gendorf.de), (Gendorf, 2015, Umwelterklärung, www.gendorf.de), (Gendorf, 2014, Umwelterklärung, www.gendorf.de). The amount of groundwater and surface water (river) extracted per kg of chemical substance produced is calculated using literature data published by the Gendorf factory based in Germany, which produces a wide range of chemical substances. The factory produced 1657400 tonnes of chemical substances in the year 2015 (Gendorf, 2016, Umwelterklärung, www.gendorf.de) and 740000 tonnes of intermediate products. The amount of groundwater and surface water (river) extracted in the year 2015 was 19950000 tonnes and 21488100 tonnes respectively (Gendorf, 2016, Umwelterklärung, www.gendorf.de). Furthermore, for this dataset, the amount is accounted for each production step. This may be an overestimation in some multistep syntheses.
- Water, well, in ground [natural resource, in water]: 0.00182216 m3; lognormal variance with pedigree 0.010025, pedigree (2,3,2,2,3)
  (same comment as for Water, river)

## Emissions to nature
- Ammonia [air, urban air close to ground]: 0.00025541 kg; lognormal variance with pedigree 0.218, pedigree (4,5,5,5,5)
  Estimation, based on the assumption that 0.2% of volatile input materials is emitted to air occurring from the purge vent, the destillation vent and fugitive emission sources.
  Uncertainty: E
- Carbon dioxide, fossil [air, urban air close to ground]: 0.093493 kg; lognormal variance with pedigree 0.1786, pedigree (4,5,5,5,5)
  Estimation, based on the assumption that 0.2% of volatile input materials is emitted to air occurring from the purge vent, the destillation vent and fugitive emission sources. Remaining gases like CH4 or CO are oxidated to CO2. The carbon contained in the removed carbon compounds from wastewater treatment was accounted as CO2 emissions to air (assuming a removal efficiency of 90%).
  Uncertainty: E
- Chlorine [air, urban air close to ground]: 0.0010517 kg; lognormal variance with pedigree 0.188, pedigree (4,5,5,5,5)
  (same comment as for Ammonia)
- Sulfate [air, unspecified]: 0.340916 kg
  Estimation, based on flue gas desulfurisation with quicklime.
- Water [air, unspecified]: 0.00307353 m3; lognormal variance with pedigree 0.010025, pedigree (2,3,2,2,3)
  Calculated to ensure the water balance. In general, in the case of recirculating cooling systems, 77% of the water input evaporates to air. In case of once-through cooling systems, 4% of the water input evaporates to air. The process water has in the chemical industry an average evaporation rate of 20.5%. In the specific case of the Gendorf factory, the calculated evaporation rate based on the data published is 6.3%. This matches the qualitative information, that the majority of the cooling systems in Gendorf are once-through and that the amount of cooling water used is significantly higher than the amount of process water used (Gendorf, 2016, Umwelterklärung, www.gendorf.de). Furthermore, for this dataset, the amount is accounted for each production step. This may be an overestimation in some multistep syntheses.
  property fraction, origin: fresh water 0; name fraction_origin_fresh_water
  property fraction, origin: salt water 0; name fraction_origin_salt_water
  property fraction, origin: unspecified 1; name fraction_origin_unspecified
- Ammonium [water, surface water]: 0.00061299 kg; lognormal variance with pedigree 0.188, pedigree (4,5,5,5,5)
  Estimation, assuming that the remaining amount of unreacted input materials leave the production process with the wastewater, wich is further treated in an internal wastewater plant. For the nitrogen containing compounds within the wastewater a removal efficiency of 50% was assumed. The nitrogen emitted to air (N2) is neglected.
  Uncertainty: E
- Calcium II [water, unspecified]: 0.142237 kg
  Estimation, based on flue gas desulfurisation with quicklime.
- Chloride [water, surface water]: 0.16742 kg; lognormal variance with pedigree 0.448, pedigree (4,5,5,5,5)
  Estimation, assuming that the remaining amount of unreacted input materials leave the production process with the wastewater, wich is further treated in an internal wastewater plant.
  Uncertainty: E
- Sodium I [water, surface water]: 0.077966 kg; lognormal variance with pedigree 0.798, pedigree (4,5,5,5,5)
  (same comment as for Chloride)
- Water [water, unspecified]: 0.0366628 m3; lognormal variance with pedigree 0.010025, pedigree (2,3,2,2,3)
  Calculated based on literature data published by the industry (Gendorf, 2016, Umwelterklärung, www.gendorf.de). The amount of water released back to the environment consists of the amount of process water treated in the internal WWTP and then released back to the environment and the amount of cooling water released back to the environment. Furthermore, for this dataset, the amount is accounted for each production step. This may be an overestimation in some multistep syntheses.
  property carbon content, fossil 0; name C_content_fossil
  property carbon content, non-fossil 0; name C_content_non_fossil
  property fraction, origin: fresh water 0; name fraction_origin_fresh_water_Ww
  property fraction, origin: salt water 0; name fraction_origin_salt_water_Ww
  property fraction, origin: unspecified 1; name fraction_origin_unspecified_Ww
  property water in wet mass 1000 kg; name WWM

## Sampling procedure
Literature data. Some values are calculated based on data from a large chemical factory located in Germany. For more details, see the comments of the exchanges.

## Review by Emilia Moreno Ruiz 2017-08-09
This dataset was additionally reviewed in a separate review process by Eric Johnson of Atlantic Consulting as well as Emilia Moreno Ruiz and Gregor Wernet of ecoinvent.
