# anaerobic digestion plant construction, for sewage sludge

Dataset: EcoSpold 2, unit process
Geography: CH
Time period: 2002-01-01 to 2022-12-31
Technology level: current
Classification: EcoSpold01Categories: biomass/fuels
Classification: ISIC rev.4 ecoinvent: 4290:Construction of other civil engineering projects
Tags: ConvertedDataset
Scenario: Business-as-Usual
System model: Allocation at the point of substitution
Share of production covered: 100 %
Generated by: Michael Spielmann (obsolete)
Published in: Jungbluth N. 2007
Database: ecoinvent
isCopyrightProtected: true

## General comment
This dataset represents the production of the reference product "anaerobic digestion plant, for sewage sludge" and the co-product "waste reinforced concrete". Infrastructure is accounted for with a lifetime of 30 years. For stationary machines a lifetime of 10 years is assumed.
[This dataset was already contained in the ecoinvent database version 2. It was not individually updated during the transfer to ecoinvent version 3. Life Cycle Impact Assessment results may still have changed, as they are affected by changes in the supply chain, i.e. in other datasets. This dataset was generated following the ecoinvent quality guidelines for version 2. It may have been subject to central changes described in the ecoinvent version 3 change report (http://www.ecoinvent.org/database/ecoinvent-version-3/reports-of-changes/), and the results of the central updates were reviewed extensively. The changes added e.g. consistent water flows and other information throughout the database. The documentation of this dataset can be found in the ecoinvent reports of version 2, which are still available via the ecoinvent website. The change report linked above covers all central changes that were made during the conversion process.]

## Included activities start
From the land transformation/occupation and the reception of the construction materials (cast iron, concrete, and steel) at the construction place.

## Included activities end
This activity ends with an anaerobic digestion plant constructed. The dataset includes only the facilities required for the anaerobic treatment of sewage sludge, including digestion tank and gasholder. Land occupation and land transformation are included, too.

## Geography
Estimate for Swiss plants.

## Technology
Swiss average technology. Data refers to an annual treatment of 50'000 PCE

## Time period
Data is obtained from a recent LCA study.

## Reference product
- anaerobic digestion plant, for sewage sludge: 1 unit; source Doka G. 2003; By-product classification allocatable product; CPC 53290: Other civil engineering works
  Inlcudes the facilities required for the anaerobic treatment of sewage sludge (digestion tank and gas holder), as described in literature.
  EcoSpold01Location=CH
  production volume 0.0336675 unit
    This is a placeholder value that does not reflect real-world production volumes. This dataset does not currently require a real-world production volume to work in the database framework, and no actual data were collected yet. This has no negative effect on the results of the ecoinvent database. The placeholder value of this activity was scaled according to the nominal GDP of 2005 (source: United Nations, http://data.un.org/Glossary.aspx?q=GDP+%28current+US%24%29, accessed 20130726) to reflect an appropriate share of the global production volume, which is also a placeholder value.
  property price 804700 EUR2005
    Convert from EU 27 price to the world by currency exchange rate.
  properties: carbon allocation 0 kg, carbon content 0

## Inputs from technosphere
All rows: source Ronchetti C. 2002
- cast iron: 504 kg; lognormal variance with pedigree 0.69, pedigree (1,1,5,1,1)
  EcoSpold01Location=RER
  Literature value, uncertainties due to variation in plant size.
  Digestion tanks normally consist of a concrete vessel covered with concrete roof structures of different
  shape and structural design. The expenditures of bulk materials required for the construction of digestion
  tanks and gasholder are available from literature. The data is linear adjusted to represent the life time expenditures for a 100’000 PCE plant. The operation of the vessels is assumed to be the same as the total plant (30 years). For stationary machines we assume a life time of 10 years.
  properties: carbon content, fossil 0.04, dry mass 1 kg, wet mass 1 kg
  note on carbon content, fossil: Cast iron is made by remelting pig iron in small furnaces (e.g. cupola furnaces or electric arc furnaces) and poured into moulds to make castings. It usually contains 2% to 6% carbon (ecoinvent v2.2 report 10_partII). An average content of 4% was considered
- reinforcing steel: 24300 kg; lognormal variance with pedigree 0.69, pedigree (1,1,5,1,1)
  Literature value, uncertainties due to variation in plant size.
  Digestion tanks normally consist of a concrete vessel covered with concrete roof structures of different shape and structural design. The expenditures of bulk materials required for the construction of digestion
  tanks and gasholder are available from literature. The data is linear adjusted to represent the life time expenditures for a 100’000 PCE plant. The operation of the vessels is assumed to be the same as the total plant (30 years). For stationary machines we assume a life time of 10 years.
  EcoSpold01Location=RER
  properties: carbon content, fossil 0.004, dry mass 1 kg, wet mass 1 kg
- steel, chromium steel 18/8, hot rolled: 1970 kg; lognormal variance with pedigree 0.69, pedigree (1,1,5,1,1)
  (same comment as for cast iron)
  properties: carbon content, fossil 0.0008, dry mass 1 kg, wet mass 1 kg
  note on carbon content, fossil: Stainless steel model is the grade 304 steel (18/8 stainless, 18% chromium 8% nickel; max. 0.08% C)
- unreinforced concrete, 15MPa: 406 m3; lognormal variance with pedigree 0.69, pedigree (1,1,5,1,1)
  EcoSpold01Location=CH
  Literature value, uncertainties due to variation in plant size.
  Digestion tanks normally consist of a concrete vessel covered with concrete roof structures of different shape and structural design. The expenditures of bulk materials required for the construction of digestion
  tanks and gasholder are available from literature. The data is linear adjusted to represent the life time expenditures for a 100’000 PCE plant. The operation of the vessels is assumed to be the same as the total plant (30 years). For stationary machines we assume a life time of 10 years.
  properties: dry mass 2190 kg, water content 0.086758, wet mass 2380 kg
- waste reinforced concrete: -893000 kg; lognormal variance with pedigree 0.65, pedigree (1,1,1,1,1)
  Literature value, uncertainties due to variation in plant size.
  EcoSpold01Location=CH
  production volume
    Calculated from the production volume of anaerobic digestion plant, for sewage sludge in proportion to the respective output amounts.
  properties: dry mass 0.99418 kg, water content 0.00585407, wet mass 1 kg

## Inputs from nature
- Occupation, construction site [natural resource, land]: 3000 m2*year; source Ronchetti C. 2002; lognormal variance with pedigree 0.0926, pedigree (2,4,5,1,1)
  Literature value, uncertainties due to variation in plant size.
  Construction time is assumed to be 3 years (assuming that digestion of sludge is predominately performed on large wastewater treatment plants. During the construction time the total area is inventoried as 'construction site'.
  Uncertainty: literature studies, uncertainties due to variation in plant size
- Occupation, industrial area [natural resource, land]: 75000 m2*year; source Ronchetti C. 2002; lognormal variance with pedigree 0.0926, pedigree (2,4,5,1,1)
  Literature value, uncertainties due to variation in plant size.
  Refers to the area occupied by the digestion tank and gasholder. The plant operation time is assumed to be 30 years. After that time the plant is expanded, renovated or closed down.
  Literature provides land use figures for the surface covered by digestion tank and gasholder. In this study we assume a plant of 100’00 PCEs (upper limit class 2), with an area of 1140 m2, a digestion tank with 2700 m3 and a gasholder with 400 m3.
  Uncertainty: literature studies, uncertainties due to variation in plant size
- Transformation, from pasture, man made [natural resource, land]: 3000 m2; source Ronchetti C. 2002; lognormal variance with pedigree 0.1726, pedigree (2,4,5,1,1)
  Literature value, uncertainties due to variation in plant size
  Sewage plants are usually located near a river and are erected on formerly open, unsealed land.
  Uncertainty: literature studies, uncertainties due to variation in plant size
- Transformation, to industrial area [natural resource, land]: 3000 m2; source Ronchetti C. 2002; lognormal variance with pedigree 0.1726, pedigree (2,4,5,1,1)
  Literature value, uncertainties due to variation in size
  Uncertainty: literature studies, uncertainties due to variation in size

## Sampling procedure
Literature data

## Review by Niels Jungbluth 2005-08-30
Passed.

## Review by Emilia Moreno Ruiz 2012-04-24
trainee DS, ok, Marcela Lange
