# treatment of sewage sludge, 70% water, WWT, WW from glass production, municipal incineration FAE

Dataset: EcoSpold 2, unit process
Geography: CH
Time period: 2006-01-01 to 2022-12-31
Technology level: current
Classification: ISIC rev.4 ecoinvent: 3821:Treatment and disposal of non-hazardous waste
Scenario: Business-as-Usual
System model: Allocation at the point of substitution
Generated by: Nikolia Stoikou
Database: ecoinvent
isCopyrightProtected: true

## General comment
The process represents the treatment of a waste (sewage sludge) that is exclusively produced from another waste treatment. Municipal incineration is the controlled combustion of a waste. Sewage sludge is generated in the wastewater treatment of 'wastewater from glass production'. Recommended use of this dataset: to be used within the specific chain of treatments for 'wastewater from glass production'. Share of biogenic carbon in the sludge: 0%.

## Included activities start
The activity starts with the waste being available at the gate of the treatment facility. Collection and transportation of the waste to the treatment plant is not included.

## Included activities end
The activity ends with the waste being treated and waste-specific emissions from the incineration process are released to the environment (air and water).

## Geography
Modelling parameters affecting the treatment technology are specific to this geography and to the technology mix encountered in Switzerland in 2012.

## Technology
The waste is treated in the incineration plant with flue gas cleaning. Incineration is the controlled combustion of a waste. Auxiliary material consumption for this step of air pollution control (APC) are included in the process. Infrastructure is also included in the process. Air polution control includes, electrostatic precipitator for fly ash (ESP), wet flue gas scrubber and 25% SNCR , 42.77% SCR-high dust , 32.68% SCR-low dust -DeNOx facilities and 0% without DeNOx (weighted according to mass of burnt waste). Efficiency of iron scrap separation from slag : 58%. Efficiency of aluminium scrap separation from slag : 31%. Efficiency of copper scrap separation from slag : 31%. The technology mix for this dataset includes a filter ash treatment (FLUWA) of a share of 46.22%. Gross electric efficiency technology mix 15.84% and Gross thermal efficiency technology mix 28.51%

## Reference product
- heat, for reuse in municipal waste incineration only: 1 MJ; By-product classification allocatable product; CPC 17300: Steam and hot water; lognormal variance with pedigree 1.8328, pedigree (1,1,1,1,1)
  net useful heat generated from this waste and used in internal MSWI plant energy redistribution.
  Uncertainty: uncertainty is calculated from uncertainties in waste composition and uncertainties in energy efficiency and the uncertainty in internal energy demand
  production volume 579.096 MJ
    Calculated from the production volume of the reference product in proportion to the respective output amounts.
  property price 0.0106 EUR2005
    Average European district heat price from Ecoheatcool and Euroheat 2005-2006, Ecoheat Work package 1: The European heat market. Final report. 10.6 EUR/GJ i s the price of district heat. http://www.solarthermalworld.org/files/Ecoheatcool%20WP1%20Web.pdf?download
  properties: carbon allocation 0 kg, carbon content 0

## Inputs from technosphere
- EUR-flat pallet: 2.6762e-8, 1.21646e-8 unit (2 suppliers, which the file names only by identifier); sum of these 3.89266e-8 unit
- acetone, liquid: 5.2248e-10 kg
- aluminium alloy, AlMg3: 5.22273e-7 kg
- aluminium, cast alloy: 1.81568e-5 kg
- ammonia, anhydrous, liquid: 7.08873e-10, 7.42975e-11, 7.23534e-10, 2.73057e-9, 3.65172e-10, 3.32137e-10, 7.8574e-9, 2.34725e-10 kg (8 suppliers, which the file names only by identifier); sum of these 1.30267e-8 kg
- argon, liquid: 3.19537e-10 kg
- brazing solder, cadmium free: 9.56302e-8 kg
- cadmium sulfide, semiconductor-grade: 1.51157e-9 kg
- cadmium telluride, semiconductor-grade: 3.26144e-8 kg
- chemical, inorganic: 1.08816e-6 kg
- copper, cathode: 2.44136e-6 kg
- diesel: 8.75477e-8 kg
- dolomite: 2.19872e-6, 1.16469e-6 kg (2 suppliers, which the file names only by identifier); sum of these 3.36341e-6 kg
- electricity, medium voltage: 1.06438e-8, 2.99565e-8, 1.39121e-5, 2.8636e-9, 7.97737e-10, 9.73307e-9, 2.3952e-5, 1.35148e-9, 4.1645e-9, 5.14512e-8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 kWh (73 suppliers, which the file names only by identifier); sum of these 0.00191244 kWh
- ethylvinylacetate, foil: 3.85503e-8 kg
- extrusion, plastic film: 2.18427e-7 kg
- feldspar: 1.41461e-6 kg
- fish curing plant: 1.14692e-12, 1.12684e-11 unit (2 suppliers, which the file names only by identifier); sum of these 1.24153e-11 unit
- gallium, semiconductor-grade: 4.87619e-10 kg
- glass fibre reinforced plastic, polyamide, injection moulded: 1.30534e-6 kg
- graphite: 6.18275e-11 kg
- heat, district or industrial, natural gas: 0.000222204, 2.26164e-5 MJ (2 suppliers, which the file names only by identifier); sum of these 0.000244821 MJ
- heat, district or industrial, other than natural gas: 0.000204202 MJ
- heavy fuel oil: 1.60076e-6, 1.34697e-8, 6.84774e-8, 8.87915e-8, 1.72796e-8, 2.31314e-8, 3.29793e-7 kg (7 suppliers, which the file names only by identifier); sum of these 2.1417e-6 kg
- hydrogen, liquid: 1.43001e-7, 6.54405e-7 kg (2 suppliers, which the file names only by identifier); sum of these 7.97405e-7 kg
- indium: 3.28582e-8 kg
- light fuel oil: 1.49489e-6, 1.4838e-7, 1.4267e-8, 3.20947e-7, 1.06027e-8, 9.84632e-9, 7.35196e-8 kg (7 suppliers, which the file names only by identifier); sum of these 2.07246e-6 kg
- lime: 6.1294e-7, 7.0968e-6 kg (2 suppliers, which the file names only by identifier); sum of these 7.70974e-6 kg
- lubricating oil: 9.72363e-10, 2.04832e-10 kg (2 suppliers, which the file names only by identifier); sum of these 1.1772e-9 kg
- metal working, average for chromium steel product manufacturing: 6.68479e-6 kg
- molybdenum: 4.87619e-10 kg
- municipal solid waste: -1.78071e-9, -1.04615e-7, -6.41212e-10, -1.25939e-6, -4.48695e-10 kg (5 suppliers, which the file names only by identifier); sum of these -1.36688e-6 kg
- natural gas, high pressure: 5.21922e-6 m3
- nitrogen, liquid: 1.74616e-7, 1.24535e-8 kg (2 suppliers, which the file names only by identifier); sum of these 1.87069e-7 kg
- oxygen, liquid: 3.813e-9, 1.38963e-8 kg (2 suppliers, which the file names only by identifier); sum of these 1.77093e-8 kg
- packaging film, low density polyethylene: 1.22948e-5 kg
- packaging glass factory: 6.18275e-15 unit
- packaging glass, white: 4.7781e-5 kg
- phosphoric acid, fertiliser grade, without water, in 70% solution state: 8.48099e-11, 2.65206e-9 kg (2 suppliers, which the file names only by identifier); sum of these 2.73687e-9 kg
- photovoltaic panel factory: 1.46156e-10 unit
- polyethylene terephthalate, granulate, amorphous: 6.45953e-6 kg
- polyethylene, high density, granulate: 4.09567e-5 kg
- polyethylene, low density, granulate: 6.72776e-7 kg
- polyvinylfluoride, film: 4.49101e-6 kg
- refractory, fireclay, packed: 7.07306e-7 kg
- scrap aluminium: -5.22741e-6, -2.45258e-7, -1.26841e-5 kg (3 suppliers, which the file names only by identifier); sum of these -1.81568e-5 kg
- scrap tin sheet: -1.40862e-6, -0.000102874 kg (2 suppliers, which the file names only by identifier); sum of these -0.000104283 kg
- selenium: 9.82239e-10 kg
- sheet rolling, aluminium: 1.81568e-5 kg
- silica sand: 3.37897e-5 kg
- silicon tetrahydride: 1.30566e-7 kg
- soda ash, light: 1.09933e-5 kg
- sodium chloride, powder: 0.000436855 kg
- soft solder, Sn97Cu3: 2.37095e-7, 1.17091e-7 kg (2 suppliers, which the file names only by identifier); sum of these 3.54187e-7 kg
- solar glass, low-iron: 6.67256e-7 kg
- solid bleached and unbleached board carton: 8.92007e-7, 6.26092e-8 kg (2 suppliers, which the file names only by identifier); sum of these 9.54616e-7 kg
- steel, low-alloyed, hot rolled: 3.5165e-5 kg
- synthetic rubber: 2.46608e-6 kg
- tap water: 2.21576e-10, 0.00145276, 9.23388e-9, 3.66191e-10, 1.64676e-10, 6.83293e-10, 1.05668e-7, 2.40217e-10, 1.84074e-9 kg (9 suppliers, which the file names only by identifier); sum of these 0.00145287 kg
- tempering, flat glass: 6.67256e-7 kg
- thermoforming of plastic sheets: 6.45953e-6 kg
- tin: 4.87619e-10 kg
- tin plated chromium steel sheet, 2 mm: 6.68479e-6 m2
- urea: 6.02654e-9, 7.62188e-10, 5.14624e-9 kg (3 suppliers, which the file names only by identifier); sum of these 1.1935e-8 kg
- vegetable oil, refined: 0.000166096 kg
- waste packaging glass, unsorted: -4.7781e-5 kg
- waste plastic, mixture: -1.40539e-6, -2.78412e-10, -5.57344e-11, -7.10173e-9, -7.46969e-12, -2.7293e-11, -4.99161e-11, -3.03428e-11, -3.47044e-11, -2.05306e-11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 kg (43 suppliers, which the file names only by identifier); sum of these -1.26536e-5 kg
- waste polyethylene, for recycling, unsorted: -1.51526e-6, -2.13217e-6, -1.51526e-6, -1.51526e-6 kg (4 suppliers, which the file names only by identifier); sum of these -6.67796e-6 kg
- waste polyvinylfluoride: -6.68384e-8, -4.42418e-6 kg (2 suppliers, which the file names only by identifier); sum of these -4.49101e-6 kg
- waste rubber, unspecified: -5.06986e-8, -1.20769e-6, -1.20769e-6 kg (3 suppliers, which the file names only by identifier); sum of these -2.46608e-6 kg
- waste, from silicon wafer production, inorganic: -1.52818e-9 kg
- wastewater from glass production: -1.52759e-6, -7.38725e-9 m3 (2 suppliers, which the file names only by identifier); sum of these -1.53498e-6 m3
- wastewater from vegetable oil refinery: -1.8144e-6 m3
- water, completely softened: 0.000484359, 0.000673882, 0.00110976 kg (3 suppliers, which the file names only by identifier); sum of these 0.002268 kg
- wire drawing, copper: 2.43937e-6 kg
- zinc: 5.36336e-10 kg

## Inputs from nature
- Water, unspecified natural origin [natural resource, in water]: 9.79347e-8 m3

## Emissions to nature
- Ammonia [air, urban air close to ground]: 1.2959e-12 kg
- Antimony ion [air, urban air close to ground]: 3.33374e-12 kg
- Arsenic ion [air, urban air close to ground]: 3.33374e-12 kg
- Benzene [air, urban air close to ground]: 8.49503e-11 kg
- Benzo(a)pyrene [air, urban air close to ground]: 7.33124e-15 kg
- Cadmium II [air, urban air close to ground]: 3.33467e-12 kg
- Carbon dioxide, fossil [air, urban air close to ground]: 3.40775e-5 kg
- Carbon monoxide, fossil [air, urban air close to ground]: 1.68348e-9 kg
- Chromium III [air, urban air close to ground]: 3.33374e-12 kg
- Cobalt II [air, urban air close to ground]: 3.33374e-12 kg
- Copper ion [air, urban air close to ground]: 3.33374e-12 kg
- Dinitrogen monoxide [air, urban air close to ground]: 1.43922e-10 kg
- Dioxins, measured as 2,3,7,8-tetrachlorodibenzo-p-dioxin [air, urban air close to ground]: 8.90732e-20 kg
- Formaldehyde [air, urban air close to ground]: 1.03322e-10 kg
- Hydrocarbons, aliphatic, alkanes, unspecified [air, urban air close to ground]: 5.88598e-10 kg
- Hydrochloric acid [air, urban air close to ground]: 2.45826e-9 kg
- Hydrogen fluoride [air, urban air close to ground]: 8.90316e-10 kg
- Lead II [air, urban air close to ground]: 3.81846e-11 kg
- Manganese II [air, urban air close to ground]: 3.33374e-12 kg
- Methane, fossil [air, urban air close to ground]: 8.65986e-10 kg
- NMVOC, non-methane volatile organic compounds [air, urban air close to ground]: 2.18622e-10 kg
- Nickel II [air, urban air close to ground]: 3.33374e-12 kg
- Nitrogen oxides [air, urban air close to ground]: 1.0387e-7 kg
- Particulate Matter, < 2.5 um [air, urban air close to ground]: 1.24644e-8 kg
- Particulate Matter, > 10 um [air, urban air close to ground]: 7.91392e-10 kg
- Particulate Matter, > 2.5 um and < 10um [air, urban air close to ground]: 6.43006e-10 kg
- Selenium IV [air, urban air close to ground]: 3.62556e-10 kg
- Sulfur dioxide [air, urban air close to ground]: 1.70149e-7 kg
- Water [air, unspecified]: 1.54333e-8 m3
- AOX, Adsorbable Organic Halogen [water, surface water]: 4.9462e-12 kg
- BOD5, Biological Oxygen Demand [water, surface water]: 4.9462e-10 kg
- COD, Chemical Oxygen Demand [water, surface water]: 4.9462e-10 kg
- Copper ion [water, surface water]: 4.9462e-14 kg
- DOC, Dissolved Organic Carbon [water, surface water]: 4.9462e-10 kg
- Nitrite [water, surface water]: 4.9462e-12 kg
- Nitrogen [water, unspecified]: 3.60633e-6 kg
- Oils, unspecified [water, surface water]: 4.9462e-11 kg
- Phosphorus [water, unspecified]: 7.48569e-7 kg
- Sulfate [water, surface water]: 4.9462e-11 kg
- Suspended solids, unspecified [water, surface water]: 4.9462e-11 kg
- TOC, Total Organic Carbon [water, surface water]: 4.9462e-10 kg
- Water [water, unspecified]: 3.96039e-10 m3
- Zinc II [water, surface water]: 4.9462e-13 kg

## Extrapolations
Modelling parameters are based on an average municipal solid waste incineration plant in Switzerland for the year of 2010 (grate incinerators).
