# treatment of waste packaging paper, municipal incineration

Dataset: EcoSpold 2, unit process
Geography: CH
Time period: 1994-01-01 to 2022-12-31
Technology level: outdated
Classification: EcoSpold01Categories: waste management/municipal incineration
Classification: ISIC rev.4 ecoinvent: 3821:Treatment and disposal of non-hazardous waste
Tags: Treatment
Scenario: Business-as-Usual
System model: Allocation at the point of substitution
Generated by: Gabor Doka
Published in: Doka G. 2007
Database: ecoinvent
isCopyrightProtected: true

## General comment
Inventoried waste contains 100% packaging paper waste;
waste composition (wet, in ppm): upper heating value 16.77 MJ/kg; lower heating value 14.12 MJ/kg; H2O 110980; O 377790; H 53851; C 403520; S 1381.8; N 4098.6; P 124.15; B 19.101; Cl 1892.4; Br n.a.; F 21.631; I n.a.; Ag n.a.; As 2.2761; Ba 125.43; Cd 1.8323; Co 0.71627; Cr 14.922; Cu 64.327; Hg 0.14537; Mn 39.49; Mo 4.7751; Ni 10.235; Pb 79.273; Sb 0.7879; Se 2.8651; Sn n.a.; V n.a.; Zn 132.49; Be 1.0824; Sc n.a.; Sr 64.751; Ti 191.01; Tl 1.9101; W n.a.; Si 21297; Fe 1305; Ca 3820.1; Al 12415; K 955.03; Mg 4775.1; Na 1020.9;
Share of carbon in waste that is biogenic 100%.
Share of iron in waste that is metallic/recyclable 0%. Net energy produced in MSWI: 1.32MJ/kg waste electric energy and 2.77MJ/kg waste thermal energy.One kg of this waste produces 0.08005 kg of slag and 0.01256 kg of residues, which are landfilled. Additional solidification with 0.005023 kg of cement.
[This dataset was already contained in the ecoinvent database version 2. It was not individually updated during the transfer to ecoinvent version 3. Life Cycle Impact Assessment results may still have changed, as they are affected by changes in the supply chain, i.e. in other datasets. This dataset was generated following the ecoinvent quality guidelines for version 2. It may have been subject to central changes described in the ecoinvent version 3 change report (http://www.ecoinvent.org/database/ecoinvent-version-3/reports-of-changes/), and the results of the central updates were reviewed extensively. The changes added e.g. consistent water flows and other information throughout the database. The documentation of this dataset can be found in the ecoinvent reports of version 2, which are still available via the ecoinvent website. The change report linked above covers all central changes that were made during the conversion process.]

## Included activities end
Waste-specific air and water emisions from incineration, auxiliary material consumption for flue gas cleaning. Short-term emissions to river water and long-term emisisons to ground water from slag compartment (from bottom slag) and residual material landfill (from solidified fly ashes and scrubber sludge). Process energy demands for MSWI.

## Geography
Specific to the technology mix encountered in Switzerland in 2000. Well applicable to modern incineration practices in Europe, North America or Japan.

## Technology
replaced by newer incineration technology with fly ash extraction. Average Swiss MSWI plants in 2000 with electrostatic precipitator for fly ash (ESP), wet flue gas scrubber and 29.4% SNCR , 32.2% SCR-high dust , 24.6% SCR-low dust -DeNOx facilities and 13.8% without Denox (by burnt waste, according to Swiss average). Share of waste incinerated in plants with magnetic scrap separation from slag : 50%. Gross electric efficiency technology mix 12.997% and Gross thermal efficiency technology mix 25.57% verage Swiss MSWI plants in 2000 with electrostatic precipitator for fly ash (ESP), wet flue gas scrubber and 29.4% SNCR , 32.2% SCR-high dust , 24.6% SCR-low dust -DeNOx facilities and 13.8% without Denox (by burnt waste, according to Swiss average). Share of waste incinerated in plants with magnetic scrap separation from slag : 50%. Gross electric efficiency technology mix 12.997% and Gross thermal efficiency technology mix 25.57%

## Time period
Waste composition as given in literature reference, theoretical data or other source. Transfer coefficients for modern Swiss MSWI. Emission speciation based on early 90ies data.

## Reference product
- waste packaging paper: -1 kg; name RP_amount_1; By-product classification Recyclable; CPC 39240: Waste and scrap of paper or paperboard
  production volume 0 kg
    outdated. Replaced by newer incineration technology with fly ash extraction.
  property price 0.1 EUR2005
    For paper and board waste the price, in 2005, according to [http://ec.europa.eu/eurostat] is about 1 EUR/kg corresponding to a purchase price of 0.099 similar to the price of UN comodittie: Waste, scrap of paper, board, nes (including unsorted).
  properties: carbon allocation 0 kg, carbon content 0, heating value, net 14.11 MJ

## Inputs from technosphere
- ammonia, anhydrous, liquid: 0.000207 kg; lognormal variance with pedigree 1.49, pedigree (1,1,5,1,1)
  EcoSpold01Location=CH
  uncertainty calculated from uncertainty in average DeNOx input, uncertainty in the share of thermal NOx, uncertainty of nitrogen content in average municipal waste and the unertainty in nitrogen content in *this* waste.
  properties: dry mass 1 kg, wet mass 1 kg
- cement, unspecified: 0.00502 kg; lognormal variance with pedigree 0.08, pedigree (1,1,5,1,1)
  EcoSpold01Location=CH
  Cement for solidification of landfilled residual material. Uncertainty calculated from unertainty of the waste composition of this waste, of transfer coefficients in the incinerator and of the solidification recipe.
  properties: dry mass 1 kg, wet mass 1 kg
- chemical, inorganic: 7.57e-6 kg; lognormal variance with pedigree 0.4, pedigree (1,1,5,1,1)
  Proxy for Polyelectrolyte. uncertainty calculated from uncertainty in average auxiliary material input, and the unertainty of the waste composition of this waste
  EcoSpold01Location=GLO
  properties: carbon content, fossil 0.003, dry mass 1 kg, wet mass 1 kg
  note on carbon content, fossil: This dataset is an unweighted average of 20 inorganic substances (listed in Tab 88.1, ecoinvent v2.2 report 8, part II), being part of the top100 chemicals included in this database. The C-content has also been calculated as an unweighted average of the C content of the substances composing this dataset.
- chemical, organic: 7.61e-6 kg; lognormal variance with pedigree 1.39, pedigree (1,1,5,1,1)
  Proxy for TMT15. uncertainty calculated from uncertainty in average auxiliary material input, and the unertainty of the waste composition of this waste
  EcoSpold01Location=GLO
  properties: carbon content, fossil 0.628, dry mass 1 kg, heating value, net 19.03 MJ, wet mass 1 kg
  note on carbon content, fossil: This dataset is an unweighted average of 20 organic substances (listed in Tab 88.1, ecoinvent v2.2 report 8, part II), being part of the top100 chemicals included in this database. The C-content has also been calculated as an unweighted average of the C content of the substances composing this dataset.
- chromium oxide, flakes: 1.21e-7 kg; lognormal variance with pedigree 2.2, pedigree (1,1,5,1,1)
  EcoSpold01Location=RER
  Proxy for vanadium pentoxide V2O5 in SCR catalyst, uncertainty calculated from uncertainty in average DeNOx input, uncertainty in the share of thermal NOx, uncertainty of nitrogen content in average municipal waste and the unertainty in nitrogen content in *this* waste.
  properties: dry mass 1 kg, wet mass 1 kg
- heat, district or industrial, natural gas: 0.0182 MJ; lognormal variance with pedigree 1.49, pedigree (1,1,5,1,1)
  uncertainty calculated from uncertainty in average DeNOx input, uncertainty in the share of thermal NOx, uncertainty of nitrogen content in average municipal waste and the unertainty in nitrogen content in *this* waste.
  EcoSpold01Location=RER
  properties: heating value, net 1 MJ
- hydrochloric acid, without water, in 30% solution state: 4.54e-6 kg; lognormal variance with pedigree 0.4, pedigree (1,1,5,1,1)
  EcoSpold01Location=RER
  uncertainty calculated from uncertainty in average auxiliary material input, and the unertainty of the waste composition of this waste
  properties: dry mass 1 kg, heating value, net 3.32 MJ, wet mass 1 kg
- iron (III) chloride, without water, in 40% solution state: 2.01e-5 kg; lognormal variance with pedigree 0.63, pedigree (1,1,5,1,1)
  uncertainty calculated from uncertainty in average auxiliary material input, and the unertainty of the waste composition of this waste
  EcoSpold01Location=CH
  properties: dry mass 1 kg, wet mass 1 kg
- municipal waste incineration facility: 2.5e-10 unit; lognormal variance with pedigree 0.04, pedigree (1,1,5,1,1)
  EcoSpold01Location=CH
  demands per kilogram waste. uncertainty is heeded in the module
- process-specific burdens, municipal waste incineration: 1 kg; lognormal variance with pedigree 0.04, pedigree (1,1,5,1,1)
  demands per kilogram waste. uncertainty is heeded in the module;activityLink introduced to establish a direct link to the corresponding regional supply of this product
  EcoSpold01Location=CH
- process-specific burdens, residual material landfill: 0.0126 kg; lognormal variance with pedigree 0.07, pedigree (1,1,5,1,1)
  uncertainty is calculated from uncertainties in waste composition and transfer coefficients in incinerator;activityLink introduced to establish a direct link to the corresponding regional supply of this product
  EcoSpold01Location=CH
- process-specific burdens, slag landfill: 0.0801 kg; lognormal variance with pedigree 0.08, pedigree (1,1,5,1,1)
  (same comment as for process-specific burdens, residual material landfill)
- quicklime, milled, packed: 0.000329 kg; lognormal variance with pedigree 0.45, pedigree (1,1,5,1,1)
  EcoSpold01Location=CH
  uncertainty calculated from uncertainty in average auxiliary material input, and the unertainty of the waste composition of this waste
  properties: dry mass 0.99 kg, water content 0.010101, wet mass 1 kg
- residual material landfill: 2.62e-11 unit; lognormal variance with pedigree 0.07, pedigree (1,1,5,1,1)
  EcoSpold01Location=CH
  uncertainty is calculated from uncertainties in waste composition and transfer coefficients in incinerator
- slag landfill: 1.42e-10 unit; lognormal variance with pedigree 0.08, pedigree (1,1,5,1,1)
  uncertainty is calculated from uncertainties in waste composition and transfer coefficients in incinerator
  EcoSpold01Location=CH
- sodium hydroxide, without water, in 50% solution state: 0.00236 kg; lognormal variance with pedigree 0.4, pedigree (1,1,5,1,1)
  (same comment as for hydrochloric acid, without water, in 30% solution state)
  properties: dry mass 1 kg, heating value, net 3.03 MJ, wet mass 1 kg
- titanium dioxide: 5.92e-6 kg; lognormal variance with pedigree 2.2, pedigree (1,1,5,1,1)
  EcoSpold01Location=RER
  uncertainty calculated from uncertainty in average DeNOx input, uncertainty in the share of thermal NOx, uncertainty of nitrogen content in average municipal waste and the unertainty in nitrogen content in *this* waste.
  properties: dry mass 1 kg, wet mass 1 kg
- waste cement, hydrated: -0.0126 kg; name BP_amount_1; lognormal variance with pedigree 0.04, pedigree (1,1,1,1,1)
  EcoSpold01Location=CH
  Hydrated cement for solidification of landfilled residual material. Uncertainty calculated from unertainty of the waste composition of this waste and transfer coefficients in the incinerator and of the solidification recipe.
  production volume
    Calculated from the production volume of waste packaging cardboard, 19.6% water in proportion to the respective output amounts.
  properties: dry mass 1 kg, wet mass 1 kg

## Emissions to nature
- Aluminium III [air, urban air close to ground]: 1.94e-5 kg; lognormal variance with pedigree 0.5, pedigree (1,1,5,1,1)
  uncertainty is calculated from uncertainties in waste composition and transfer coefficients in incinerator
- Ammonia [air, urban air close to ground]: 3.25e-6 kg; lognormal variance with pedigree 1.6, pedigree (1,1,5,1,1)
  uncertainty calculated from uncertainty in average N-emissions, uncertainty in the share of thermal NOx, uncertainty of nitrogen content in average municipal waste and the unertainty in nitrogen content in *this* waste.
- Antimony ion [air, urban air close to ground]: 3.06e-15 kg; lognormal variance with pedigree 2.09, pedigree (1,1,5,1,1)
  (same comment as for Aluminium III)
- Arsenic ion [air, urban air close to ground]: 2.32e-14 kg; lognormal variance with pedigree 1.7, pedigree (1,1,5,1,1)
  (same comment as for Aluminium III)
- Barium II [air, urban air close to ground]: 1.25e-7 kg; lognormal variance with pedigree 1.09, pedigree (1,1,5,1,1)
  (same comment as for Aluminium III)
- Beryllium II [air, urban air close to ground]: 1.08e-9 kg; lognormal variance with pedigree 1.61, pedigree (1,1,5,1,1)
  (same comment as for Aluminium III)
- Boron [air, urban air close to ground]: 2.29e-6 kg; lognormal variance with pedigree 1.13, pedigree (1,1,5,1,1)
  (same comment as for Aluminium III)
- Cadmium II [air, urban air close to ground]: 1.01e-10 kg; lognormal variance with pedigree 1.65, pedigree (1,1,5,1,1)
  (same comment as for Aluminium III)
- Calcium [air, urban air close to ground]: 6.37e-6 kg; lognormal variance with pedigree 0.5, pedigree (1,1,5,1,1)
  (same comment as for Aluminium III)
- Carbon dioxide, non-fossil [air, urban air close to ground]: 1.46 kg; lognormal variance with pedigree 0.06, pedigree (1,1,5,1,1)
  (same comment as for Aluminium III)
- Carbon monoxide, non-fossil [air, urban air close to ground]: 0.000223 kg; lognormal variance with pedigree 0.690625, pedigree (1,3,5,2,1)
  literature data from switzerland and germany adapted to plant age distribution in switzerland
  Uncertainty: & basic uncertainty of 5; literature data from switzerland and germany adapted to plant age distribution in switzerland
- Chromium III [air, urban air close to ground]: 1.1e-12 kg; lognormal variance with pedigree 1.41, pedigree (1,1,5,1,1)
  (same comment as for Aluminium III)
- Cobalt II [air, urban air close to ground]: 2.27e-14 kg; lognormal variance with pedigree 1.72, pedigree (1,1,5,1,1)
  (same comment as for Aluminium III)
- Copper ion [air, urban air close to ground]: 4.75e-10 kg; lognormal variance with pedigree 1.2, pedigree (1,1,5,1,1)
  (same comment as for Aluminium III)
- Cyanide [air, urban air close to ground]: 3.69e-6 kg; lognormal variance with pedigree 1.6, pedigree (1,1,5,1,1)
  (same comment as for Ammonia)
- Dinitrogen monoxide [air, urban air close to ground]: 1.73e-5 kg; lognormal variance with pedigree 1.6, pedigree (1,1,5,1,1)
  (same comment as for Ammonia)
- Hydrochloric acid [air, urban air close to ground]: 2.1e-8 kg; lognormal variance with pedigree 0.5, pedigree (1,1,5,1,1)
  (same comment as for Aluminium III)
- Hydrogen fluoride [air, urban air close to ground]: 1.14e-8 kg; lognormal variance with pedigree 1.13, pedigree (1,1,5,1,1)
  (same comment as for Aluminium III)
- Iron ion [air, urban air close to ground]: 4.36e-8 kg; lognormal variance with pedigree 0.5, pedigree (1,1,5,1,1)
  (same comment as for Aluminium III)
- Lead II [air, urban air close to ground]: 2.94e-9 kg; lognormal variance with pedigree 1.21, pedigree (1,1,5,1,1)
  (same comment as for Aluminium III)
- Magnesium [air, urban air close to ground]: 6.58e-6 kg; lognormal variance with pedigree 0.5, pedigree (1,1,5,1,1)
  (same comment as for Aluminium III)
- Manganese II [air, urban air close to ground]: 2.15e-13 kg; lognormal variance with pedigree 1.13, pedigree (1,1,5,1,1)
  (same comment as for Aluminium III)
- Mercury II [air, urban air close to ground]: 5.02e-15 kg; lognormal variance with pedigree 1.86, pedigree (1,1,5,1,1)
  (same comment as for Aluminium III)
- Methane, non-fossil [air, urban air close to ground]: 6.38e-6 kg; lognormal variance with pedigree 0.091225, pedigree (2,3,5,2,1)
  confidential data from 5 plants in Switzerland and Germany
  Uncertainty: & basic uncertainty of 1.5; confidential data from 5 plants in Switzerland and Germany
- Molybdenum VI [air, urban air close to ground]: 9.55e-9 kg; lognormal variance with pedigree 1.4, pedigree (1,1,5,1,1)
  (same comment as for Aluminium III)
- Nickel II [air, urban air close to ground]: 4.42e-13 kg; lognormal variance with pedigree 1.4, pedigree (1,1,5,1,1)
  (same comment as for Aluminium III)
- Nitrogen oxides [air, urban air close to ground]: 0.00013 kg; lognormal variance with pedigree 1.6, pedigree (1,1,5,1,1)
  (same comment as for Ammonia)
- Phosphorus [air, urban air close to ground]: 1.24e-7 kg; lognormal variance with pedigree 1.09, pedigree (1,1,5,1,1)
  (same comment as for Aluminium III)
- Potassium I [air, urban air close to ground]: 2.88e-6 kg; lognormal variance with pedigree 0.5, pedigree (1,1,5,1,1)
  (same comment as for Aluminium III)
- Selenium IV [air, urban air close to ground]: 1.44e-14 kg; lognormal variance with pedigree 1.58, pedigree (1,1,5,1,1)
  (same comment as for Aluminium III)
- Silicon [air, urban air close to ground]: 4.96e-5 kg; lognormal variance with pedigree 0.5, pedigree (1,1,5,1,1)
  (same comment as for Aluminium III)
- Sodium [air, urban air close to ground]: 9.61e-6 kg; lognormal variance with pedigree 0.5, pedigree (1,1,5,1,1)
  (same comment as for Aluminium III)
- Strontium [air, urban air close to ground]: 6.48e-9 kg; lognormal variance with pedigree 1.14, pedigree (1,1,5,1,1)
  (same comment as for Aluminium III)
- Sulfur dioxide [air, urban air close to ground]: 5.89e-6 kg; lognormal variance with pedigree 0.64, pedigree (1,1,5,1,1)
  (same comment as for Aluminium III)
- Thallium I [air, urban air close to ground]: 1.91e-9 kg; lognormal variance with pedigree 1.65, pedigree (1,1,5,1,1)
  (same comment as for Aluminium III)
- Titanium ion [air, urban air close to ground]: 1.91e-7 kg; lognormal variance with pedigree 1.09, pedigree (1,1,5,1,1)
  (same comment as for Aluminium III)
- Zinc II [air, urban air close to ground]: 2.16e-9 kg; lognormal variance with pedigree 1.11, pedigree (1,1,5,1,1)
  (same comment as for Aluminium III)
- Aluminium III [water, ground-, long-term]: 0.00919 kg; lognormal variance with pedigree 0.29, pedigree (1,1,5,1,1)
  Long-term emissions from landfilling of incineration residues. uncertainty is calculated from uncertainties in waste composition and transfer coefficients in incinerator and landfills.
- Aluminium III [water, surface water]: 1.03e-6 kg; lognormal variance with pedigree 0.94, pedigree (1,1,5,1,1)
  uncertainty is calculated from uncertainties in waste composition and transfer coefficients in incinerator and landfills
- Antimony ion [water, ground-, long-term]: 5.04e-7 kg; lognormal variance with pedigree 1.68, pedigree (1,1,5,1,1)
  (same comment as for Aluminium III)
- Antimony ion [water, surface water]: 2.73e-7 kg; lognormal variance with pedigree 1.71, pedigree (1,1,5,1,1)
  (same comment as for Aluminium III)
- Arsenic ion [water, ground-, long-term]: 1.25e-6 kg; lognormal variance with pedigree 1.59, pedigree (1,1,5,1,1)
  (same comment as for Aluminium III)
- Arsenic ion [water, surface water]: 1.03e-6 kg; lognormal variance with pedigree 1.34, pedigree (1,1,5,1,1)
  (same comment as for Aluminium III)
- BOD5, Biological Oxygen Demand [water, ground-, long-term]: 0.00326 kg; lognormal variance with pedigree 0.06, pedigree (1,1,5,1,1)
  (same comment as for Aluminium III)
- BOD5, Biological Oxygen Demand [water, surface water]: 1.51e-5 kg; lognormal variance with pedigree 0.17, pedigree (1,1,5,1,1)
  (same comment as for Aluminium III)
- Barium II [water, ground-, long-term]: 0.000111 kg; lognormal variance with pedigree 1.12, pedigree (1,1,5,1,1)
  (same comment as for Aluminium III)
- Barium II [water, surface water]: 1.72e-8 kg; lognormal variance with pedigree 1.95, pedigree (1,1,5,1,1)
  (same comment as for Aluminium III)
- Beryllium II [water, ground-, long-term]: 8.72e-7 kg; lognormal variance with pedigree 1.38, pedigree (1,1,5,1,1)
  (same comment as for Aluminium III)
- Beryllium II [water, surface water]: 6.73e-10 kg; lognormal variance with pedigree 1.84, pedigree (1,1,5,1,1)
  (same comment as for Aluminium III)
- Boron [water, ground-, long-term]: 1.26e-5 kg; lognormal variance with pedigree 0.69, pedigree (1,1,5,1,1)
  (same comment as for Aluminium III)
- Boron [water, surface water]: 2.99e-6 kg; lognormal variance with pedigree 1.16, pedigree (1,1,5,1,1)
  (same comment as for Aluminium III)
- COD, Chemical Oxygen Demand [water, ground-, long-term]: 0.00996 kg; lognormal variance with pedigree 0.06, pedigree (1,1,5,1,1)
  (same comment as for Aluminium III)
- COD, Chemical Oxygen Demand [water, surface water]: 2.7e-5 kg; lognormal variance with pedigree 0.29, pedigree (1,1,5,1,1)
  (same comment as for Aluminium III)
- Cadmium II [water, ground-, long-term]: 1.84e-8 kg; lognormal variance with pedigree 7.34, pedigree (1,1,5,1,1)
  (same comment as for Aluminium III)
- Cadmium II [water, surface water]: 8.31e-10 kg; lognormal variance with pedigree 1.58, pedigree (1,1,5,1,1)
  (same comment as for Aluminium III)
- Calcium II [water, ground-, long-term]: 0.00332 kg; lognormal variance with pedigree 0.59, pedigree (1,1,5,1,1)
  (same comment as for Aluminium III)
- Calcium II [water, surface water]: 1.44e-5 kg; lognormal variance with pedigree 1.04, pedigree (1,1,5,1,1)
  (same comment as for Aluminium III)
- Chloride [water, ground-, long-term]: 4.47e-5 kg; lognormal variance with pedigree 0.22, pedigree (1,1,5,1,1)
  (same comment as for Aluminium III)
- Chloride [water, surface water]: 0.00185 kg; lognormal variance with pedigree 0.4, pedigree (1,1,5,1,1)
  (same comment as for Aluminium III)
- Chromium III [water, surface water]: 4.76e-8 kg; lognormal variance with pedigree 1.33, pedigree (1,1,5,1,1)
  (same comment as for Aluminium III)
- Chromium VI [water, ground-, long-term]: 1.58e-6 kg; lognormal variance with pedigree 1.53, pedigree (1,1,5,1,1)
  (same comment as for Aluminium III)
- Chromium VI [water, surface water]: 4.86e-7 kg; lognormal variance with pedigree 1.24, pedigree (1,1,5,1,1)
  (same comment as for Aluminium III)
- Cobalt II [water, ground-, long-term]: 6.27e-7 kg; lognormal variance with pedigree 1.56, pedigree (1,1,5,1,1)
  (same comment as for Aluminium III)
- Cobalt II [water, surface water]: 1.23e-10 kg; lognormal variance with pedigree 2.05, pedigree (1,1,5,1,1)
  (same comment as for Aluminium III)
- Copper ion [water, ground-, long-term]: 5.2e-5 kg; lognormal variance with pedigree 1.11, pedigree (1,1,5,1,1)
  (same comment as for Aluminium III)
- Copper ion [water, surface water]: 2.61e-9 kg; lognormal variance with pedigree 1.75, pedigree (1,1,5,1,1)
  (same comment as for Aluminium III)
- DOC, Dissolved Organic Carbon [water, ground-, long-term]: 0.00394 kg; lognormal variance with pedigree 0.06, pedigree (1,1,5,1,1)
  (same comment as for Aluminium III)
- DOC, Dissolved Organic Carbon [water, surface water]: 1.11e-5 kg; lognormal variance with pedigree 0.28, pedigree (1,1,5,1,1)
  (same comment as for Aluminium III)
- Fluoride [water, ground-, long-term]: 1.93e-5 kg; lognormal variance with pedigree 0.89, pedigree (1,1,5,1,1)
  (same comment as for Aluminium III)
- Fluoride [water, surface water]: 1.66e-6 kg; lognormal variance with pedigree 0.94, pedigree (1,1,5,1,1)
  (same comment as for Aluminium III)
- Iron ion [water, ground-, long-term]: 0.000611 kg; lognormal variance with pedigree 1.49, pedigree (1,1,5,1,1)
  (same comment as for Aluminium III)
- Iron ion [water, surface water]: 4.47e-7 kg; lognormal variance with pedigree 0.4, pedigree (1,1,5,1,1)
  (same comment as for Aluminium III)
- Lead II [water, ground-, long-term]: 5.65e-6 kg; lognormal variance with pedigree 7.21, pedigree (1,1,5,1,1)
  (same comment as for Aluminium III)
- Lead II [water, surface water]: 2.21e-9 kg; lognormal variance with pedigree 1.18, pedigree (1,1,5,1,1)
  (same comment as for Aluminium III)
- Magnesium [water, ground-, long-term]: 0.00441 kg; lognormal variance with pedigree 0.59, pedigree (1,1,5,1,1)
  (same comment as for Aluminium III)
- Magnesium [water, surface water]: 1.67e-5 kg; lognormal variance with pedigree 1.04, pedigree (1,1,5,1,1)
  (same comment as for Aluminium III)
- Manganese II [water, ground-, long-term]: 3.4e-5 kg; lognormal variance with pedigree 1.1, pedigree (1,1,5,1,1)
  (same comment as for Aluminium III)
- Manganese II [water, surface water]: 2.21e-9 kg; lognormal variance with pedigree 1.77, pedigree (1,1,5,1,1)
  (same comment as for Aluminium III)
- Mercury II [water, ground-, long-term]: 7.56e-9 kg; lognormal variance with pedigree 3.51, pedigree (1,1,5,1,1)
  (same comment as for Aluminium III)
- Mercury II [water, surface water]: 1.55e-9 kg; lognormal variance with pedigree 1.73, pedigree (1,1,5,1,1)
  (same comment as for Aluminium III)
- Molybdenum VI [water, ground-, long-term]: 3.95e-6 kg; lognormal variance with pedigree 1.44, pedigree (1,1,5,1,1)
  (same comment as for Aluminium III)
- Molybdenum VI [water, surface water]: 8.16e-7 kg; lognormal variance with pedigree 1.04, pedigree (1,1,5,1,1)
  (same comment as for Aluminium III)
- Nickel II [water, ground-, long-term]: 9.58e-6 kg; lognormal variance with pedigree 1.25, pedigree (1,1,5,1,1)
  (same comment as for Aluminium III)
- Nickel II [water, surface water]: 6.42e-9 kg; lognormal variance with pedigree 1.87, pedigree (1,1,5,1,1)
  (same comment as for Aluminium III)
- Nitrate [water, ground-, long-term]: 0.000147 kg; lognormal variance with pedigree 0.59, pedigree (1,1,5,1,1)
  (same comment as for Aluminium III)
- Nitrate [water, surface water]: 5.24e-5 kg; lognormal variance with pedigree 0.41, pedigree (1,1,5,1,1)
  (same comment as for Aluminium III)
- Phosphate [water, ground-, long-term]: 1.45e-5 kg; lognormal variance with pedigree 5.65, pedigree (1,1,5,1,1)
  (same comment as for Aluminium III)
- Phosphate [water, surface water]: 2.43e-8 kg; lognormal variance with pedigree 1.34, pedigree (1,1,5,1,1)
  (same comment as for Aluminium III)
- Potassium I [water, ground-, long-term]: 0.000787 kg; lognormal variance with pedigree 0.59, pedigree (1,1,5,1,1)
  (same comment as for Aluminium III)
- Potassium I [water, surface water]: 0.000166 kg; lognormal variance with pedigree 0.4, pedigree (1,1,5,1,1)
  (same comment as for Aluminium III)
- Selenium IV [water, ground-, long-term]: 1.93e-6 kg; lognormal variance with pedigree 0.99, pedigree (1,1,5,1,1)
  (same comment as for Aluminium III)
- Selenium IV [water, surface water]: 9.33e-7 kg; lognormal variance with pedigree 1.16, pedigree (1,1,5,1,1)
  (same comment as for Aluminium III)
- Silicon [water, ground-, long-term]: 0.00185 kg; lognormal variance with pedigree 5.65, pedigree (1,1,5,1,1)
  (same comment as for Aluminium III)
- Silicon [water, surface water]: 4.51e-6 kg; lognormal variance with pedigree 0.4, pedigree (1,1,5,1,1)
  (same comment as for Aluminium III)
- Sodium I [water, ground-, long-term]: 0.000791 kg; lognormal variance with pedigree 0.59, pedigree (1,1,5,1,1)
  (same comment as for Aluminium III)
- Sodium I [water, surface water]: 0.000221 kg; lognormal variance with pedigree 0.41, pedigree (1,1,5,1,1)
  (same comment as for Aluminium III)
- Strontium [water, ground-, long-term]: 6.47e-5 kg; lognormal variance with pedigree 1.11, pedigree (1,1,5,1,1)
  (same comment as for Aluminium III)
- Strontium [water, surface water]: 4.08e-8 kg; lognormal variance with pedigree 1.82, pedigree (1,1,5,1,1)
  (same comment as for Aluminium III)
- Sulfate [water, ground-, long-term]: 0.00347 kg; lognormal variance with pedigree 0.36, pedigree (1,1,5,1,1)
  (same comment as for Aluminium III)
- Sulfate [water, surface water]: 0.000671 kg; lognormal variance with pedigree 0.31, pedigree (1,1,5,1,1)
  (same comment as for Aluminium III)
- TOC, Total Organic Carbon [water, ground-, long-term]: 0.00394 kg; lognormal variance with pedigree 0.06, pedigree (1,1,5,1,1)
  (same comment as for Aluminium III)
- TOC, Total Organic Carbon [water, surface water]: 1.11e-5 kg; lognormal variance with pedigree 0.28, pedigree (1,1,5,1,1)
  (same comment as for Aluminium III)
- Thallium I [water, ground-, long-term]: 1.11e-6 kg; lognormal variance with pedigree 1.11, pedigree (1,1,5,1,1)
  (same comment as for Aluminium III)
- Thallium I [water, surface water]: 1.17e-9 kg; lognormal variance with pedigree 1.75, pedigree (1,1,5,1,1)
  (same comment as for Aluminium III)
- Titanium ion [water, ground-, long-term]: 5.72e-5 kg; lognormal variance with pedigree 1.25, pedigree (1,1,5,1,1)
  (same comment as for Aluminium III)
- Titanium ion [water, surface water]: 9.21e-10 kg; lognormal variance with pedigree 2.05, pedigree (1,1,5,1,1)
  (same comment as for Aluminium III)
- Zinc II [water, ground-, long-term]: 2.05e-6 kg; lognormal variance with pedigree 5.65, pedigree (1,1,5,1,1)
  (same comment as for Aluminium III)
- Zinc II [water, surface water]: 2.44e-8 kg; lognormal variance with pedigree 0.94, pedigree (1,1,5,1,1)
  (same comment as for Aluminium III)

## Sampling procedure
waste-specific calculation based on literature data

## Extrapolations
Typical elemental transfer coefficients from current studies for modern MSWI, completed with data from coal power plants and estimates, adapted for inert/burnable waste.
