# treatment of wastewater from glass production, wastewater treatment

Dataset: EcoSpold 2, unit process
Geography: CH
Time period: 2010-01-01 to 2022-12-31
Technology level: current
Classification: ISIC rev.4 ecoinvent: 3700:Sewerage
Scenario: Business-as-Usual
System model: Allocation at the point of substitution
Generated by: Nikolia Stoikou
Database: ecoinvent
isCopyrightProtected: true

## General comment
This dataset represents the treatment of a wastewater, generated from an ordinary transforming activity. Purification in wastewater treatment of 'wastewater from glass production'. Recommended use of this dataset: to be used for wastewaters, generated from ordinary transforming activities, of equal or similar composition. The wastewater has a content of TOC: 0.029492 kg/m3, COD: 0.11498 kg/m3 and BOD: 0.05561 kg/m3. TOC is equal to C present in the wastewater, COD is calculated as TOC/0.2565 and BOD is calculated as COD/0.53034. Detailed elemental composition can be found in the properties of the wastewater treated. Share of biogenic carbon in the sludge: 0%.

## Included activities start
The activity starts with the wastewater being available at the gate of the treatment facility. Collection and transportation of the wastewater to the treatment plant is not included.

## Included activities end
The activity ends with the wastewater being treated and waste-specific emissions released to the environment. Expenditures from treatment of wastewater in waste treatment plant are included as well as relevant infrastructure of the plant. Emissions from any sludge digestion, biogas generation and utilization (heeding specific wastewater composition) are also included. Waste-specific direct emissions of untreated wastewater and required territory-specific infrastructure for sewers are not contained within this dataset but instead in the regional market datasets for this wastewater.

## Geography
The site has mean annual temperature (MAT) of 9.5 degC, mean annual precipitation (MAP) of 1483.00559816076 mm/year, mean annual actual evaporation (EAT) of 528.63778611689 mm/year. In the WWT plant, 0% of its water input are lost due to evaporation from pools, 0.00158% of water is *gained* from organic mass degradation, and 0.015% is removed off site via sludge disposal. (References: UN data, 2020. Precipitation, Environment Statistics Database, United Nations Statistics Division Available at: http://data.un.org/Data.aspx?q=precipitation&d=ENV&f=variableID%3a6; World Bank, 2022. Surface area (sq.km), World Bank Group Available at: https://data.worldbank.org/indicator/AG.SRF.TOTL.K2; MeteoSwiss, 2022. Data on Swiss temperature mean, Federal Department of Home Affairs FDHA. Federal Office of Meteorology and Climatology. Swiss Climate Available at: https://www.MeteoSwiss.admin.ch/home/climate/swiss-climate-in-detail/Swiss-temperature-mean/Data-on-the-Swiss-temperature-mean.html?query=TEMPERATURE+DATA&topic=/content/MeteoSwiss/tags/topics/klima&pageIndex=0&tab=search_tab; Doka G.,2021. A model for composition-specific life cycle inventories of regionalised wastewater fates, Zurich, Switzerland. http://www.doka.ch/publications.htm)

## Technology
This activity represents the treatment of a specific wastewater in a WWT plant (while direct emissions and sewering are heeded in the upstream market dataset for this wastewater). The size of the treatment plant infrastructure is for a national average territory situation. The assumed size of the WWTP treats 90.6 Mio m3 per year. The mixture of WWTP with one, two, or three stages is 0%-11.2%-88.8%. The actual, waste-specific oxygen requirement in the biological stages is 0.04024kg O. Generated waste-specific raw sludge is treated with anaerobic digestion. The digestion process produces 33.11 litres of biogas with an energy content of 0.6905MJ. 23.6% of the biogas is utilized for energy. The remainder is flared. The gross electric efficiency is 26.564%. The gross thermal efficiency is 47.853%. After digestion, the remaining total sludge mass (dry matter) is 0.08382kg DM.

## Reference product
- iron scrap, sorted, pressed: 1 kg; By-product classification Recyclable; CPC 39310: Slag, dross, scalings and other waste from the manufacture of iron or steel; lognormal variance with pedigree 0.3109, pedigree (1,1,1,1,1)
  scrap output from used infrastructure for wastewater treatment plant.
  Uncertainty: Uncertainty calculated from wastewater technosphere fate uncertainty and treatment infrastructure uncertainty.
  production volume 364.185 kg
    Calculated in proportion to wastewater reference product.
  property price 0.175 EUR2005
    Temporary price data. Calculated as 90% of purchasers price based on: 2005 import and export prices (total trades (USD) divided by total weight (kg) in biggest economies of the world: EU27, USA, Brasil, China, India, Japan and Russia) from UN Commodity Trade Statistics Database (http://data.un.org/Explorer.aspxDatabase [Accessed 2011.06.20]). Commodity: Waste or scrap, of cast iron
  properties: carbon allocation 0 kg, carbon content 0, carbon content, fossil 0, carbon content, non-fossil 0, dry mass 1 kg, water content 0, water in wet mass 0 kg, wet mass 1 kg

## Inputs from technosphere
- EUR-flat pallet: 4.41826e-7, 2.0083e-7 unit (2 suppliers, which the file names only by identifier); sum of these 6.42656e-7 unit
- acetone, liquid: 8.62586e-9 kg
- aluminium alloy, AlMg3: 8.62243e-6 kg
- aluminium, cast alloy: 0.000299758 kg
- ammonia, anhydrous, liquid: 1.17031e-8, 1.22661e-9, 1.19451e-8, 4.50801e-8, 6.02878e-9, 5.4834e-9, 1.29721e-7, 3.87518e-9 kg (8 suppliers, which the file names only by identifier); sum of these 2.15064e-7 kg
- argon, liquid: 5.27537e-9 kg
- brazing solder, cadmium free: 1.5788e-6 kg
- cadmium sulfide, semiconductor-grade: 2.49552e-8 kg
- cadmium telluride, semiconductor-grade: 5.38446e-7 kg
- chemical, inorganic: 1.7965e-5 kg
- copper, cathode: 4.03055e-5 kg
- diesel: 1.44536e-6 kg
- dolomite: 3.62997e-5, 1.92284e-5 kg (2 suppliers, which the file names only by identifier); sum of these 5.55281e-5 kg
- electricity, medium voltage: 1.75724e-7, 4.94565e-7, 0.00022968, 4.72765e-8, 1.31702e-8, 1.60687e-7, 0.000395434, 2.23122e-8, 6.87536e-8, 8.49431e-7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 kWh (73 suppliers, which the file names only by identifier); sum of these 0.0315734 kWh
- ethylvinylacetate, foil: 6.36444e-7 kg
- extrusion, plastic film: 3.60611e-6 kg
- feldspar: 2.33545e-5 kg
- fish curing plant: 1.89351e-11, 1.86035e-10 unit (2 suppliers, which the file names only by identifier); sum of these 2.0497e-10 unit
- gallium, semiconductor-grade: 8.05031e-9 kg
- glass fibre reinforced plastic, polyamide, injection moulded: 2.15504e-5 kg
- graphite: 1.02074e-9 kg
- heat, district or industrial, natural gas: 0.00366846, 0.000373385 MJ (2 suppliers, which the file names only by identifier); sum of these 0.00404185 MJ
- heat, district or industrial, other than natural gas: 0.00337125 MJ
- heavy fuel oil: 2.64277e-5, 2.22377e-7, 1.13052e-6, 1.4659e-6, 2.85277e-7, 3.81886e-7, 5.44469e-6 kg (7 suppliers, which the file names only by identifier); sum of these 3.53583e-5 kg
- hydrogen, liquid: 2.36086e-6, 1.08038e-5 kg (2 suppliers, which the file names only by identifier); sum of these 1.31647e-5 kg
- indium: 5.42471e-7 kg
- light fuel oil: 2.46799e-5, 2.44967e-6, 2.35539e-7, 5.29865e-6, 1.75045e-7, 1.62557e-7, 1.21377e-6 kg (7 suppliers, which the file names only by identifier); sum of these 3.42151e-5 kg
- lime: 1.01193e-5, 0.000117164 kg (2 suppliers, which the file names only by identifier); sum of these 0.000127283 kg
- lubricating oil: 1.60532e-8, 3.38166e-9 kg (2 suppliers, which the file names only by identifier); sum of these 1.94348e-8 kg
- metal working, average for chromium steel product manufacturing: 0.000110362 kg
- molybdenum: 8.05031e-9 kg
- municipal solid waste: -2.93986e-8, -1.72713e-6, -1.0586e-8, -2.07918e-5, -7.4077e-9 kg (5 suppliers, which the file names only by identifier); sum of these -2.25664e-5 kg
- natural gas, high pressure: 8.61664e-5 m3
- nitrogen, liquid: 2.88281e-6, 2.05601e-7 kg (2 suppliers, which the file names only by identifier); sum of these 3.08841e-6 kg
- oxygen, liquid: 6.29504e-8, 2.29421e-7 kg (2 suppliers, which the file names only by identifier); sum of these 2.92371e-7 kg
- packaging film, low density polyethylene: 0.000202981 kg
- packaging glass factory: 1.02074e-13 unit
- packaging glass, white: 0.000788837 kg
- phosphoric acid, fertiliser grade, without water, in 70% solution state: 1.40016e-9, 4.3784e-8 kg (2 suppliers, which the file names only by identifier); sum of these 4.51842e-8 kg
- photovoltaic panel factory: 2.41295e-9 unit
- polyethylene terephthalate, granulate, amorphous: 0.000106643 kg
- polyethylene, high density, granulate: 0.000676171 kg
- polyethylene, low density, granulate: 1.11072e-5 kg
- polyvinylfluoride, film: 7.41441e-5 kg
- refractory, fireclay, packed: 1.16772e-5 kg
- scrap aluminium: -8.63016e-5, -4.04907e-6, -0.000209407 kg (3 suppliers, which the file names only by identifier); sum of these -0.000299758 kg
- scrap tin sheet: -2.32556e-5, -0.00169839 kg (2 suppliers, which the file names only by identifier); sum of these -0.00172165 kg
- selenium: 1.62162e-8 kg
- sheet rolling, aluminium: 0.000299758 kg
- silica sand: 0.000557848 kg
- silicon tetrahydride: 2.15558e-6 kg
- soda ash, light: 0.000181494 kg
- sodium chloride, powder: 0.00721222 kg
- soft solder, Sn97Cu3: 3.91431e-6, 1.93311e-6 kg (2 suppliers, which the file names only by identifier); sum of these 5.84742e-6 kg
- solar glass, low-iron: 1.1016e-5 kg
- solid bleached and unbleached board carton: 1.47265e-5, 1.03364e-6 kg (2 suppliers, which the file names only by identifier); sum of these 1.57602e-5 kg
- steel, low-alloyed, hot rolled: 0.000580555 kg
- synthetic rubber: 4.07136e-5 kg
- tap water: 3.65809e-9, 0.0239842, 1.52446e-7, 6.0456e-9, 2.71871e-9, 1.12808e-8, 1.74452e-6, 3.96585e-9, 3.03896e-8 kg (9 suppliers, which the file names only by identifier); sum of these 0.0239861 kg
- tempering, flat glass: 1.1016e-5 kg
- thermoforming of plastic sheets: 0.000106643 kg
- tin: 8.05031e-9 kg
- tin plated chromium steel sheet, 2 mm: 0.000110362 m2
- urea: 9.94948e-8, 1.25833e-8, 8.49615e-8 kg (3 suppliers, which the file names only by identifier); sum of these 1.9704e-7 kg
- vegetable oil, refined: 0.00274215 kg
- waste packaging glass, unsorted: -0.000788837 kg
- waste plastic, mixture: -2.32022e-5, -4.59642e-9, -9.20144e-10, -1.17245e-7, -1.2332e-10, -4.50591e-10, -8.24086e-10, -5.00942e-10, -5.72951e-10, -3.38949e-10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 kg (43 suppliers, which the file names only by identifier); sum of these -0.000208904 kg
- waste polyethylene, for recycling, unsorted: -2.50161e-5, -3.52009e-5, -2.50161e-5, -2.50161e-5 kg (4 suppliers, which the file names only by identifier); sum of these -0.000110249 kg
- waste polyvinylfluoride: -1.10346e-6, -7.30406e-5 kg (2 suppliers, which the file names only by identifier); sum of these -7.41441e-5 kg
- waste rubber, unspecified: -8.37006e-7, -1.99383e-5, -1.99383e-5 kg (3 suppliers, which the file names only by identifier); sum of these -4.07136e-5 kg
- waste, from silicon wafer production, inorganic: -2.52294e-8 kg
- wastewater from glass production: -2.52197e-5, -1.21959e-7 m3 (2 suppliers, which the file names only by identifier); sum of these -2.53417e-5 m3
- wastewater from vegetable oil refinery: -2.99548e-5 m3
- water, completely softened: 0.0079965, 0.0111254, 0.0183216 kg (3 suppliers, which the file names only by identifier); sum of these 0.0374435 kg
- wire drawing, copper: 4.02726e-5 kg
- zinc: 8.85461e-9 kg

## Inputs from nature
- Water, unspecified natural origin [natural resource, in water]: 1.61685e-6 m3

## Emissions to nature
- Ammonia [air, urban air close to ground]: 2.13946e-11 kg
- Antimony ion [air, urban air close to ground]: 5.50381e-11 kg
- Arsenic ion [air, urban air close to ground]: 5.50381e-11 kg
- Benzene [air, urban air close to ground]: 1.40248e-9 kg
- Benzo(a)pyrene [air, urban air close to ground]: 1.21035e-13 kg
- Cadmium II [air, urban air close to ground]: 5.50535e-11 kg
- Carbon dioxide, fossil [air, urban air close to ground]: 0.000562601 kg
- Carbon monoxide, fossil [air, urban air close to ground]: 2.77934e-8 kg
- Chromium III [air, urban air close to ground]: 5.50381e-11 kg
- Cobalt II [air, urban air close to ground]: 5.50381e-11 kg
- Copper ion [air, urban air close to ground]: 5.50381e-11 kg
- Dinitrogen monoxide [air, urban air close to ground]: 2.37608e-9 kg
- Dioxins, measured as 2,3,7,8-tetrachlorodibenzo-p-dioxin [air, urban air close to ground]: 1.47055e-18 kg
- Formaldehyde [air, urban air close to ground]: 1.70578e-9 kg
- Hydrocarbons, aliphatic, alkanes, unspecified [air, urban air close to ground]: 9.71741e-9 kg
- Hydrochloric acid [air, urban air close to ground]: 4.05845e-8 kg
- Hydrogen fluoride [air, urban air close to ground]: 1.46986e-8 kg
- Lead II [air, urban air close to ground]: 6.30407e-10 kg
- Manganese II [air, urban air close to ground]: 5.50381e-11 kg
- Methane, fossil [air, urban air close to ground]: 1.42969e-8 kg
- NMVOC, non-methane volatile organic compounds [air, urban air close to ground]: 3.60932e-9 kg
- Nickel II [air, urban air close to ground]: 5.50381e-11 kg
- Nitrogen oxides [air, urban air close to ground]: 1.71484e-6 kg
- Particulate Matter, < 2.5 um [air, urban air close to ground]: 2.0578e-7 kg
- Particulate Matter, > 10 um [air, urban air close to ground]: 1.30654e-8 kg
- Particulate Matter, > 2.5 um and < 10um [air, urban air close to ground]: 1.06157e-8 kg
- Selenium IV [air, urban air close to ground]: 5.9856e-9 kg
- Sulfur dioxide [air, urban air close to ground]: 2.80907e-6 kg
- Water [air, unspecified]: 2.54795e-7 m3
- AOX, Adsorbable Organic Halogen [water, surface water]: 8.16589e-11 kg
- BOD5, Biological Oxygen Demand [water, surface water]: 8.16589e-9 kg
- COD, Chemical Oxygen Demand [water, surface water]: 8.16589e-9 kg
- Copper ion [water, surface water]: 8.16589e-13 kg
- DOC, Dissolved Organic Carbon [water, surface water]: 8.16589e-9 kg
- Nitrite [water, surface water]: 8.16589e-11 kg
- Nitrogen [water, unspecified]: 5.95384e-5 kg
- Oils, unspecified [water, surface water]: 8.16589e-10 kg
- Phosphorus [water, unspecified]: 1.23584e-5 kg
- Sulfate [water, surface water]: 8.16589e-10 kg
- Suspended solids, unspecified [water, surface water]: 8.16589e-10 kg
- TOC, Total Organic Carbon [water, surface water]: 8.16589e-9 kg
- Water [water, unspecified]: 6.53839e-9 m3
- Zinc II [water, surface water]: 8.16589e-12 kg
