# silicone factory construction

Dataset: EcoSpold 2, unit process
Geography: RoW
Time period: 1999-01-01 to 2022-12-31
Technology level: current
Classification: EcoSpold01Categories: chemicals/inorganics
Classification: ISIC rev.4 ecoinvent: 4290:Construction of other civil engineering projects
Scenario: Business-as-Usual
System model: Allocation at the point of substitution
Generated by: Niels Jungbluth
Published in: Althaus H.-J. 2004
Database: ecoinvent
isCopyrightProtected: true

## General comment
Average of two plants. Chemical production since more than 100 years. Life time estimated to be 100a. Annual production 1 Mio. tonnes.

## Included activities end
Inventory for the production plant including land use, machinery and buildings.

## Geography
Production plant in DE.

## Technology
Chemical production facility.

## Time period
Reporting time of environmental reports.

## Reference product
- silicone factory: 1 unit; By-product classification allocatable product; CPC 53269: Other constructions for manufacturing
  EcoSpold01Location=RER
  production volume 2.67763 unit
    This is a placeholder value that does not reflect real-world production volumes. This dataset does not currently require a real-world production volume to work in the database framework, and no actual data were collected yet. This has no negative effect on the results of the ecoinvent database.
  property price 4.22764e9 EUR2005
    Convert from EU 27 price to the world by currency exchange rate.
  properties: carbon allocation 0 kg, carbon content 0

## Inputs from technosphere
- building, hall: 2.27976e6 m2; lognormal variance with pedigree 0.3421, pedigree (1,2,5,5,1)
  Calculation for 100a, approx. 150 factories
  EcoSpold01Location=CH
  Uncertainty: Calculation for 100a, approx. 150 factories
- chemical factory: 3.1984e7 kg; lognormal variance with pedigree 0.63, pedigree (5,5,5,5,5)
  EcoSpold01Location=RER
  Rough estimation, doubled inventory for life time of 100a.
  Uncertainty: Rough estimation, doubled inventory for life time of 100a.
- decommissioned chemical production facilities: -3.1984e7 kg; lognormal variance with pedigree 0.59, pedigree (5,5,1,5,5)
  Rough estimation
  EcoSpold01Location=RER
  Uncertainty: Rough estimation
  production volume
    Calculated from the production volume of silicone factory in proportion to the respective output amounts.
  properties: carbon content, fossil 0.0169382, carbon content, non-fossil 5.78006e-6, dry mass 1 kg, wet mass 1 kg
  note on carbon content, fossil: Calculated from C content in input materials in the infrastructure
- pipeline, natural gas, low pressure distribution network: 161.669 km; lognormal variance with pedigree 0.3421, pedigree (1,2,5,5,1)
  EcoSpold01Location=CH
  Calculation for 100a, approx. 150 factories
  Uncertainty: Calculation for 100a, approx. 150 factories
- pipeline, petroleum: 253.733 km; lognormal variance with pedigree 0.3421, pedigree (1,2,5,5,1)
  Calculation for 100a, approx. 150 factories
  EcoSpold01Location=RER
  Uncertainty: Calculation for 100a, approx. 150 factories
- railway track: 62871.5 m*year; lognormal variance with pedigree 0.3421, pedigree (1,2,5,5,1)
  (same comment as for pipeline, natural gas, low pressure distribution network)

## Inputs from nature
- Occupation, dump site [natural resource, land]: 2.15072e7 m2*year; lognormal variance with pedigree 0.0821, pedigree (1,2,5,5,1)
  100a occupation
  Uncertainty: 100a occupation
- Occupation, industrial area [natural resource, land]: 2.74222e8 m2*year; lognormal variance with pedigree 0.0821, pedigree (1,2,5,5,1)
  100a occupation
  Uncertainty: 100a occupation
- Occupation, traffic area, road network [natural resource, land]: 5.05426e7 m2*year; lognormal variance with pedigree 0.0821, pedigree (1,2,5,5,1)
  100a occupation
  Uncertainty: 100a occupation
- Transformation, from unspecified [natural resource, land]: 3.46266e6 m2; lognormal variance with pedigree 0.1621, pedigree (1,2,5,5,1)
  Environmental report
  Uncertainty: Environmental report
- Transformation, to dump site, residual material landfill [natural resource, land]: 215072 m2; lognormal variance with pedigree 0.1621, pedigree (1,2,5,5,1)
  Environmental report
  Uncertainty: Environmental report
- Transformation, to industrial area [natural resource, land]: 2.74222e6 m2; lognormal variance with pedigree 0.1621, pedigree (1,2,5,5,1)
  Environmental report
  Uncertainty: Environmental report
- Transformation, to traffic area, road network [natural resource, land]: 505426 m2; lognormal variance with pedigree 0.1621, pedigree (1,2,5,5,1)
  Environmental report
  Uncertainty: Environmental report

## Sampling procedure
Environmental reports and webpage.

## Extrapolations
None This dataset has been copied from an original dataset covering the geography RER. The uncertainty has been adjusted accordingly.

## Review by Roland Hischier 2006-09-27
Passed.
none

## Review by Carl Vadenbo 2012-06-28
In preparation for the release of ecoinvent v3.0, the inputs of railway decommissioning was removed from the dataset 'silicone plant, RER' and added to railway construction instead. Furthermore, the dataset was renamed and extrapolated to 'silicon factory construction, GLO 1999-2001'. The removal of aforementioned exchanges was reviewed and the dataset was accepted for inclusion into the ecoinvent database on 2012.07.06. It is nevertheless recommended that the dataset is revised and that the meta-data is improved prior to subsequent releases of the database.
