# biomethane, low pressure burned in polymer electrolyte membrane fuel cell 2kWe, future

Dataset: EcoSpold 2, unit process
Geography: RoW
Time period: 2000-01-01 to 2022-12-31
Technology level: current
Classification: ISIC rev.4 ecoinvent: 35:Electricity, gas, steam and air conditioning supply
Classification: EcoSpold01Categories: biomass/cogeneration
Synonyms: proton exchange membrane fuel cell; polymer electrolyte fuel cell; Polymer Elektrolyt Membran Brennstoffzelle; Membran Brennstoffzelle; PEMFC; PEFC
Tags: with true value; ConvertedDataset
Scenario: Business-as-Usual
System model: Allocation at the point of substitution
Generated by: Alex Primas
Published in: Primas A. 2007
Database: ecoinvent
isCopyrightProtected: true

## General comment
The multioutput-process 'biogas, burned in PEM fuel cell 2kWe delivers the coproducts 'heat, biogas, allocation exergy, at PEM fuel cell 2kWe' and 'electricity, biogas, allocation exergy, at PEM fuel cell 2kWe'. The exergy allocation is the allocation scheme suggested to be used within the ecoinvent database (e.g. in electricity mixes).
[This dataset was already contained in the ecoinvent database version 2. It was not individually updated during the transfer to ecoinvent version 3. Life Cycle Impact Assessment results may still have changed, as they are affected by changes in the supply chain, i.e. in other datasets. This dataset was generated following the ecoinvent quality guidelines for version 2. It may have been subject to central changes described in the ecoinvent version 3 change report (http://www.ecoinvent.org/database/ecoinvent-version-3/reports-of-changes/), and the results of the central updates were reviewed extensively. The changes added e.g. consistent water flows and other information throughout the database. The documentation of this dataset can be found in the ecoinvent reports of version 2, which are still available via the ecoinvent website. The change report linked above covers all central changes that were made during the conversion process.]

## Included activities end
The module includes fuel input, infrastructure and emissions to air.

## Geography
Biogas input modelled for conditions in Switzerland. Process applicable in central European conditions.

## Technology
polymer electrolyte membrane (PEM) fuel cell for stationary cogeneration. Performance, stack lifetime and catalyst use according to expected future values for a serial product. Operation with refined biogas from low pressure gas network. Electrical efficiency 32%, total efficiency 87%.

## Reference product
- heat, future: 1 MJ; By-product classification allocatable product; CPC 17300: Steam and hot water
  EcoSpold01Location=CH
  production volume 0 MJ
    Unknown
    Calculated from the production volume of methane, 96% by volume, from biogas, low pressure, at user in proportion to the respective output amounts.
  property exergy 0.093 MJ
    allocation factor for electricity (=1) vs. heat, where heat is calculated as the termodynamic mean temperature Tm = (Tfeed-Treturn)/ln(Tfeed/Treturn), relative to the application temperature (Tu, typically = 293 K), i.e. (Tm-Tu)/Tm
  property price 0.0106 EUR2005
    Average European district heat price from Ecoheatcool and Euroheat 2005-2006, Ecoheat Work package 1: The European heat market. Final report. 10.6 EUR/GJ i s the price of district heat. http://www.solarthermalworld.org/files/Ecoheatcool%20WP1%20Web.pdf?download
  properties: allocation factor 0.193172, carbon allocation 0 kg, carbon content 0, heating value, net 1 MJ, true value 0.00296348, true value relation 0.1393

## Inputs from technosphere
- biomethane, low pressure: 0.351222 MJ
  properties: carbon content, non-fossil 0.695496, dry mass 0.0218341 kg, wet mass 0.0218341 kg
- fuel cell, polymer electrolyte membrane, 2kW electrical, future: 2.9123e-7 unit; lognormal variance with pedigree 0.3532, pedigree (2,3,5,5,1)
  Uncertainty of life time
  EcoSpold01Location=CH
  Uncertainty: uncertainty of life time
- maintenance, polymer electrolyte membrane fuel cell, 2kW electrical: 4.07734e-6 unit; lognormal variance with pedigree 0.0432, pedigree (2,3,5,5,1)
  EcoSpold01Location=CH
  Uncertainty of maintenance cycle
  Uncertainty: uncertainty of maintenance cycle
- storage, 650 l mini CHP plant: 2.05026e-7 unit; lognormal variance with pedigree 0.3532, pedigree (2,3,5,5,1)
  Uncertainty of life time
  EcoSpold01Location=CH
  Uncertainty: uncertainty of life time

## Emissions to nature
- Carbon dioxide, non-fossil [air, urban air close to ground]: 0.0196066 kg; lognormal variance with pedigree 0.0512, pedigree (2,5,5,5,1)
  Composition of biogas
  Uncertainty: composition of biogas
- Carbon monoxide, non-fossil [air, urban air close to ground]: 5.97078e-7 kg; lognormal variance with pedigree 0.6932, pedigree (2,3,5,5,1)
  Estimate based on different references
  Uncertainty: estimate based on different references
- Methane, non-fossil [air, urban air close to ground]: 1.40489e-6 kg; lognormal variance with pedigree 0.1106, pedigree (4,3,5,5,1)
  Estimate based on few references
  Uncertainty: estimate based on few references
- NMVOC, non-methane volatile organic compounds [air, urban air close to ground]: 1.05367e-7 kg; lognormal variance with pedigree 0.1006, pedigree (4,3,5,5,1)
  Estimate based on different references
  Uncertainty: estimate based on different references
- Nitrogen oxides [air, urban air close to ground]: 4.56589e-7 kg; lognormal variance with pedigree 0.0832, pedigree (2,3,5,5,1)
  Estimate based on different references
  Uncertainty: estimate based on different references
- Particulate Matter, < 2.5 um [air, urban air close to ground]: 7.02445e-11 kg; lognormal variance with pedigree 0.39, pedigree (4,4,5,5,3)
  Estimate based on one references
  Uncertainty: estimate based on one references
- Sulfur dioxide [air, urban air close to ground]: 1.93172e-7 kg; lognormal variance with pedigree 0.0512, pedigree (2,5,5,5,1)
  Composition of natural gas
  Uncertainty: composition of natural gas

## Sampling procedure
Literature data and manufacturer information

## Extrapolations
none This dataset has been copied from an original dataset covering the geography CH. The uncertainty has been adjusted accordingly.

## Review by Rolf Frischknecht 2007-08-13
passed
none
