# treatment of scrap lead acid battery, remelting

Dataset: EcoSpold 2, unit process
Geography: RER
Time period: 2000-01-01 to 2022-12-31
Technology level: current
Classification: ISIC rev.4 ecoinvent: 2420:Manufacture of basic precious and other non-ferrous metals
Classification: EcoSpold01Categories: metals/extraction
Synonyms: Recycling of lead acid (PbA) batteries
Tags: ConvertedDataset
Scenario: Business-as-Usual
System model: Allocation at the point of substitution
Generated by: Mischa Classen
Published in: Classen M. 2009
Database: ecoinvent
isCopyrightProtected: true

## General comment
This dataset describes the production of 1 kg of secondary lead from spent lead acid batteries, in Europe, at plant. The data refers to one big operation in Europe (Campine Ltd, Belgium, as in Campine NV, 2006) that operates with representative technology. Thus, the reliability and correctness of the data set is limited and may not be applicable to life cycle assessment studies of products where the production of secondary lead becomes important. All lead alloys produced on this activity, such as antimonial lead up to 10% Sb, calcium-aluminium lead alloys with or without tin and soft lead with low and high copper content, are grouped and approximated with "lead", the reference product.
[This dataset was already contained in the ecoinvent database version 2. It was not individually updated during the transfer to ecoinvent version 3. Life Cycle Impact Assessment results may still have changed, as they are affected by changes in the supply chain, i.e. in other datasets. This dataset was generated following the ecoinvent quality guidelines for version 2. It may have been subject to central changes described in the ecoinvent version 3 change report (http://www.ecoinvent.org/database/ecoinvent-version-3/reports-of-changes/), and the results of the central updates were reviewed extensively. The changes added e.g. consistent water flows and other information throughout the database. The documentation of this dataset can be found in the ecoinvent reports of version 2, which are still available via the ecoinvent website. The change report linked above covers all central changes that were made during the conversion process.]

## Included activities start
From the transport of auxiliary materials and energy carriers to the factory gate.

## Included activities end
This activity includes the sorting and remelting of the lead contained in lead acid batteries, and the transport of slag to the landfill, for disposal.

The dataset does not include the transportation of lead scrap to thefactory, nor water consumption for the process.

## Geography
This module represents the European production based on a single major site in Belgium.

## Technology
The referred operation uses a shaft furnace with post combustion, which is the usual technology for secondary smelters.
Typically this technology produces 5000 t / a sulphuric acid (15% concentration), 25’000 t lead bullion (98% Pb), 1200 t / a slags (1% Pb) and 3000 t / a raw lead matte (10% Pb) to be shipped to primary smelters. Overall Pb yield is typically 98.8% at the plant level and 99.8% after reworking the matte.
The operation treats junk batteries and plates but also lead cable sheathing, drosses and sludges, leaded glass and balancing weights. From this feed it manufactures mainly antimonial lead up to 10% Sb, calcium-aluminium lead alloys with or without tin and soft lead with low and high copper content. All these products are the result of a refining and alloying step to meet the compliance with the designations desired.
The following by products are reused in the process: fine dust, slag, and sulfuric acid.
References:
Quirijnen L. (1999) How to implement efficient local lead-acid battery recycling. In: Journal of Power Sources, 78(1-2), pp. 267-269.

## Reference product
- lead: 1 kg; name BP_amount_1; source Fisher K. 2006; By-product classification allocatable product; CPC 41441: Lead, unwrought; CAS 7439-92-1
  EcoSpold01Location=RER
  Lead is a lustrous metal. When freshly cut, surfaces are bluish white but oxidise readily to the familiar dull grey colour. Lead has four naturally occurring isotopes: 208Pb (51 - 53 %), 206Pb (23.5 - 27 %), 207Pb (20.5 - 23 %) and 204Pb (1.35 - 1.5 %). Three of the natural isotopes are radioactive (208Pb, end product of thorium decay; 206Pb and 207Pb, from uranium series). A number of unstable radioactive isotopes of Pb also exist. Lead is a preferred shielding material against gamma rays and X-rays; if sufficiently pure, it does not become radioactive when used for shielding against neutron sources (Sutherland et al., 1997).
  Uses: Generally toxicity concerns and substitution by plastics and copper have reduced the market considerably. Main applications of lead are the following (Sutherland et al., 1997):
  - Batteries: The battery market is by far the largest end use of lead. Batteries for starting, lighting and ignition (SLI) represent the predominant use of lead. Traction batteries are used to power electric vehicles. Stationary batteries are used for standby and emergency power supply.
  - Pigments and Lead Compounds: After batteries, the next largest use of refined lead is in glass making, ceramic glazes, plastic stabilisers, and paints. The lead pigment market is now very small.
  - Semi finished Products: Rolled and extruded lead, mainly sheet and pipe, account for about 8 % of total lead use.
  - Cable Sheathing: A major area of lead use was in the protection of electrical and telecommunications cables, but this market has declined drastically due to substitution by aluminium and plastics.
  - Lead Alloys: Solders, type metal, bearing alloys containing lead still account for about 4 % of the lead consumption.
  - Gasoline Additives: In 1972 the use of tetraethyl lead for improving the octane rating of gasoline was nearly 400’000 t/a. Since then, this sector has declined by 70 % due to restrictions through environmental legislation.
  - Shot and Ammunition: Shot and ammunition account for about 2 % of lead consumption and represent a steady market.
  - Miscellaneous: Uses that do not fall into the above categories account for about 4 % of lead use, and include products featuring the high density of lead such as wheel weights, yacht keels, ornamental items, stained glass, and massive radiation shielding.
  Proxy: All lead alloys produced on this activity, such as antimonial lead up to 10% Sb, calcium-aluminium lead alloys with or without tin and soft lead with low and high copper content, are grouped and approximated with "lead", the reference product.
  Calculated value.
  production volume 1.61807e9 kg
    Calculated from the production volume of scrap lead acid battery in proportion to the respective output amounts.
  property price 0.744 EUR2005
    Temporary price data. Calculated as 90% of purchasers price based on: Source: ecoinvent v2 report 10-part IX, Tab 5.10 & 2.5
  properties: carbon allocation 0 kg, carbon content 0, carbon content, fossil 0, carbon content, non-fossil 0, dry mass 1 kg, water content 0, water in wet mass 0 kg, wet mass 1 kg

## Inputs from technosphere
- acetylene: 4.51337e-9, 2.14255e-8 kg (2 suppliers, which the file names only by identifier); sum of these 2.59389e-8 kg
- acrylonitrile-butadiene-styrene copolymer: 5.70319e-5 kg
- aluminium, cast alloy: 2.99932e-6 kg
- aluminium, wrought alloy: 7.5042e-7 kg
- barite: 9.00504e-6 kg
- calcium carbide, technical grade: 6.16331e-7, 1.63493e-6 kg (2 suppliers, which the file names only by identifier); sum of these 2.25126e-6 kg
- carbon black: 3.00168e-6 kg
- cast iron: 1.93504e-6 kg
- copper, cathode: 0.000489256 kg
- electricity, low voltage: 0.0248421, 0.0492312, 0.472918, 0.00843614, 0.151377, 0.169019, 0.00153415 kWh (7 suppliers, which the file names only by identifier); sum of these 0.877357 kWh
- electricity, medium voltage: 0.000571599, 0.000560668, 0.000207016, 0.00164447, 0.00124692, 1.66967e-5, 8.51934e-5, 0.00514418, 0.000381329, 0.000281379 kWh (10 suppliers, which the file names only by identifier); sum of these 0.0101395 kWh
- electronics, for control units: 7.50724e-7 kg
- ethylene: 0.0465722, 0.00986675, 0.00074724 kg (3 suppliers, which the file names only by identifier); sum of these 0.0571862 kg
- ethylene glycol: 0.0030098 kg
- flat glass, uncoated: 2.06515e-7, 1.00286e-6 kg (2 suppliers, which the file names only by identifier); sum of these 1.20938e-6 kg
- glass fibre: 0.000187605 kg
- heat, district or industrial, natural gas: 0.038126, 0.0077387 MJ (2 suppliers, which the file names only by identifier); sum of these 0.0458648 MJ
- heat, district or industrial, other than natural gas: 0.000799666, 0.00385294 MJ (2 suppliers, which the file names only by identifier); sum of these 0.0046526 MJ
- injection moulding: 5.26689e-6 kg
- integrated circuit, logic type: 1.50084e-8 kg
- lead: 0.042952 kg
- lubricating oil: 0.0403461, 0.0084127 kg (2 suppliers, which the file names only by identifier); sum of these 0.0487588 kg
- metal working factory: 3.43692e-12 unit
- oxygen, liquid: 1.34038e-8, 4.88496e-8 kg (2 suppliers, which the file names only by identifier); sum of these 6.22534e-8 kg
- polyethylene terephthalate, granulate, amorphous: 0.0075245 kg
- polyethylene, high density, granulate: 0.0075245 kg
- polypropylene, granulate: 0.00959749 kg
- powder coat, steel: 4.12506e-7 m2
- printed wiring board, through-hole mounted, unspecified, Pb free: 3.00168e-6 kg
- road vehicle factory: 4.52893e-15 unit
- scrap copper: -3.49483e-6, -7.44884e-5, -0.000373752 kg (3 suppliers, which the file names only by identifier); sum of these -0.000451735 kg
- scrap lead acid battery: -0.0472351 kg
- scrap steel: -1.08295e-7, -0.000265454, -8.54761e-5 kg (3 suppliers, which the file names only by identifier); sum of these -0.000351038 kg
- silver: 7.5042e-7 kg
- steel, chromium steel 18/8, hot rolled: 8.79692e-6 kg
- steel, low-alloyed: 0.000323345 kg
- steel, low-alloyed, hot rolled: 0.0165728 kg
- sulfate pulp, unbleached: 2.25936e-6, 1.49274e-6 kg (2 suppliers, which the file names only by identifier); sum of these 3.7521e-6 kg
- sulfuric acid: 0.00217082, 0.000408804 kg (2 suppliers, which the file names only by identifier); sum of these 0.00257963 kg
- synthetic rubber: 0.174582 kg
- tap water: 0.000310514 kg
- tin: 3.00168e-5 kg
- used tyre: -0.191122 kg
- waste aluminium: -2.99932e-6 kg
- waste bulk iron, excluding reinforcement: -1.29567e-6, -6.23084e-7, -1.6287e-8 kg (3 suppliers, which the file names only by identifier); sum of these -1.93504e-6 kg
- waste electric and electronic equipment: -7.50724e-7 kg
- waste glass sheet: -2.47882e-7, -6.31109e-9, -9.55182e-7 kg (3 suppliers, which the file names only by identifier); sum of these -1.20938e-6 kg
- waste mineral oil: -0.000203234, -0.0403461, -0.00820947 kg (3 suppliers, which the file names only by identifier); sum of these -0.0487588 kg
- waste polyethylene: -0.00612114, -0.000160413, -0.0428513, -0.000408991, -3.09313e-5, -0.000168928, -6.82449e-5, -0.0103861 kg (8 suppliers, which the file names only by identifier); sum of these -0.060196 kg
- waste polyethylene/polypropylene product: -0.019924, -0.00403339, -0.000121032 kg (3 suppliers, which the file names only by identifier); sum of these -0.0240784 kg
- waste polypropylene: -7.75458e-9, -6.0281e-7, -3.51469e-9, -4.86914e-6, -1.91951e-8, -4.64731e-8, -1.82275e-8, -6.95537e-7 kg (8 suppliers, which the file names only by identifier); sum of these -6.26266e-6 kg
- waste rubber, unspecified: -2.67698e-7, -6.37682e-6, -6.37682e-6 kg (3 suppliers, which the file names only by identifier); sum of these -1.30213e-5 kg
- wastewater from lorry production: -2.49605e-10, -5.16152e-8 m3 (2 suppliers, which the file names only by identifier); sum of these -5.18648e-8 m3
- wastewater, average: -1.49589e-9, -8.86258e-10, -2.48922e-7, -5.95224e-8 m3 (4 suppliers, which the file names only by identifier); sum of these -3.10827e-7 m3
- water, completely softened: 7.3729e-8, 1.02578e-7, 1.37035e-7 kg (3 suppliers, which the file names only by identifier); sum of these 3.13342e-7 kg
- water, deionised: 5.68482e-7, 0.000157922, 0.000651963 kg (3 suppliers, which the file names only by identifier); sum of these 0.000810453 kg
- wire drawing, copper: 2.64577e-7 kg

## Emissions to nature
- Carbon dioxide, fossil [air, non-urban air or from high stacks]: 8.77932e-8 kg

## Sampling procedure
literature

## Extrapolations
see Geography and Technology

## Review by Roberto Dones 2007-09-28
passed

## Review by Roland Hischier 2011-09-19
Transfer of documentation done.
