# heat production, straw, organic, at furnace 300kW

Dataset: EcoSpold 2, unit process
Geography: RER
Time period: 1983-01-01 to 2022-12-31
Technology level: current
Classification: ISIC rev.4 ecoinvent: 3530:Steam and air conditioning supply
Classification: EcoSpold01Categories: wood energy/heating systems
Scenario: Business-as-Usual
System model: Allocation at the point of substitution
Generated by: Avraam Symeonidis
Database: ecoinvent
isCopyrightProtected: true

## General comment
Production of heat by burning straw, organic, in a furnace of 300kw capacity for heat production. The infrastructure, and the electricity inputs were obtained from the dataset wood chips, hard wood, burned in furnace 300kw. The emissions were obtained from literature.
[This dataset is meant to replace the following datasets:
- treatment of straw, organic, in furnace 300kW, GLO, 1983 - 2007]

## Included activities start
From reception of straw, organic at the furnace

## Included activities end
This module describes the combustion of straw, organic. Included are the infrastructure, the straw requirements , the emissions to air, the electricity needed for operation, and the disposal of the ashes.

## Geography
based on geography of production of straw from barley, rye and wheat.

## Technology
based on technology from wood chips burning dataset and several studies with experimental burning in different furnaces.

## Time period
from oldest to newest publication date of litarature sources

## Reference product
- ash, from combustion of straw: 1 kg; name APB; = 54/1000; By-product classification Recyclable; CPC 86119: Other support services to crop production
  54 kg of slag are produced per 1 ton of straw burned. The slag is returned to farmland (Nielsen, 2004).This flow is expressed as phosphate fertiliser, as P2O5 and nitrogen fertiliser, as N.
  The slag produced during straw combustion contains 0,8-2.1% P2O5 and 0,05-0,08% N . (http://www.lcafood.dk/processes/energyconversion/heatandpowerfromstraw.htm)
  The average values are used for this inventory.
  production volume 1.46423e7 kg
    Calculated from production volume of reference product using the relative outputs.
  property nitrogen content 0.00065; = (((0.05+0.08)/2)/100)
    The slag produced during straw combustion contains 0,8-2.1% P2O5 and 0,05-0,08% N . (http://www.lcafood.dk/processes/energyconversion/heatandpowerfromstraw.htm)
    The average values are used for this inventory.
  property oxygen content 0.008178; = 0.0145*(1-0.436)
    (same comment as for ash, from combustion of straw)
  property phosphorus content 0.006322; = 0.0145*0.436
    (same comment as for ash, from combustion of straw)
  properties: allocation factor 0, carbon allocation 0 kg, carbon content 0, carbon content, fossil 0, carbon content, non-fossil 0, dry mass 1 kg, price 0 EUR2005, true value 0, water content 0, water in wet mass 0 kg, wet mass 1 kg

## Extrapolations
The data on emissions are extrapolated from a power plant using straw as an energy source and from several experimental studies found in literature review. Due to a lack of specific emissions for organic straw, these are obtained from data on emissions for regular straw burning.
