# treatment of sewage sludge, 97% water, WWT, heat carrier liquid, 40% C3H8O2, landfarming

Dataset: EcoSpold 2, unit process
Geography: RoW
Time period: 2000-01-01 to 2022-12-31
Technology level: current
Classification: ISIC rev.4 ecoinvent: 3821:Treatment and disposal of non-hazardous waste
Scenario: Business-as-Usual
System model: Allocation at the point of substitution
Generated by: Nikolia Stoikou
Database: ecoinvent
isCopyrightProtected: true

## General comment
The process represents the treatment of a waste (sewage sludge) that is exclusively produced from another waste treatment. Recommended use of this dataset: to be used within the specific chain of treatments for 'heat carrier liquid, 40% C3H8O2'. Share of biogenic carbon in the sludge: 0%.

## Included activities start
The activity starts with the waste being available for landfarming. Collection and transportation of the waste to this process is not included.

## Included activities end
The activity ends with the waste being treated and waste-specific emissions from the landfarming process are released to the environment (air, water and soil). The activity is considering local fate of emissions and the initial specific wastewater composition (generating the sewage sludge). Further, it includes provision of fertiliser functions for N, P, K, if present in the sludge.

## Geography
The site has mean annual temperature (MAT) of 16.743579766537 degC, mean annual precipitation (MAP) of 1250.84108527132 mm/year, mean annual actual evaporation (EAT) of 460.58904958214 mm/year. Climate will influence the local fate emissions based on the elemental composition of the sludge as well as water evaporation to air (= consumptive water use).
References: UN data, 2020. Precipitation, Environment Statistics Database, United Nations Statistics Division Available at: http://data.un.org/Data.aspx?q=precipitation&d=ENV&f=variableID%3a6;
World Bank, 2022. Surface area (sq.km), World Bank Group Available at: https://data.worldbank.org/indicator/AG.SRF.TOTL.K2;
Doka G.,2021. A model for composition-specific life cycle inventories of regionalised wastewater fates, Zurich, Switzerland. http://www.doka.ch/publications.htm

## Technology
Landfarming is the process of spreading a substrate on agricultural soil. Sewage sludge is generated in the wastewater treatment of heat carrier liquid, 40% C3H8O2. Spreading of liquid sewage sludge (97w% water content) on agricultural fields with mobile vacuum tanker.

## Reference product
- organic nitrogen fertiliser, as N: 1 kg; By-product classification allocatable product; CPC 34659: Fertilizers n.e.c.
  gross fertilizer function provided from sewage sludge spreading on agricultural fields.
  production volume 0.46526 kg
    Calculated in proportion to wastewater reference product.
  property nitrogen content 1
    Nitrogen content (on a dry matter basis) of organic nitrogen fertiliser, as N is calculated from the molecular formula of the substance (Nitrogen).
  property price 0.473 EUR2005
    Set equal to the price of the corresponding inorganic fertiliser
  properties: carbon allocation 0 kg, carbon content 0, carbon content, fossil 0, carbon content, non-fossil 0, dry mass 1 kg, water content 0, water in wet mass 0 kg, wet mass 1 kg

## Inputs from technosphere
- activated bentonite: 0.000805712 kg
- aluminium, wrought alloy: 0.000343393 kg
- ammonia, anhydrous, liquid: 3.17859e-6, 3.33151e-7, 3.24434e-6, 1.22439e-5, 1.63743e-6, 1.48931e-6, 3.52327e-5, 1.05251e-6 kg (8 suppliers, which the file names only by identifier); sum of these 5.84119e-5 kg
- anti-reflex-coating, etching, solar glass: 4.82207e-6 m2
- brazing solder, cadmium free: 4.17074e-7 kg
- building, hall, steel construction: 1.43596e-7 m2
- building, multi-storey: 8.59953e-7 m3
- cement, unspecified: 0.00274199, 1.02878e-5, 6.72919e-6, 0.000272278, 7.16946e-5, 8.54651e-6, 3.38576e-6, 4.36909e-5, 0.000164959 kg (9 suppliers, which the file names only by identifier); sum of these 0.00332356 kg
- chemical, organic: 4.68482e-8 kg
- copper, cathode: 0.00066189 kg
- corrugated board box: 4.85183e-6, 1.12616e-5, 1.80731e-7 kg (3 suppliers, which the file names only by identifier); sum of these 1.62942e-5 kg
- diesel, burned in building machine: 1.78264 MJ
- drawing of pipe, steel: 0.000258962 kg
- electricity, low voltage: 1.83709e-5, 3.64069e-5, 0.000349727, 6.2386e-6, 0.000124991, 1.13452e-6, 8.66388e-5, 2.5513e-5 kWh (8 suppliers, which the file names only by identifier); sum of these 0.000649021 kWh
- electricity, medium voltage: 3.85433e-7, 3.68444e-8, 6.68613e-6, 3.40404e-5, 1.73887e-8, 1.06217e-5, 3.16314e-7, 1.61396e-6, 1.40184e-5, 2.07903e-8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 kWh (23 suppliers, which the file names only by identifier); sum of these 0.000179164 kWh
- electronics scrap from control units: -4.86766e-5 kg
- electronics, for control units: 4.86766e-5 kg
- ethylene glycol: 0.0103945 kg
- evacuated tube collector: 3.73146e-5 m2
- expansion vessel, 25l: 5.40223e-6 unit
- expansion vessel, 80l: 1.89381e-6 unit
- flat plate solar collector, Cu absorber: 0.000127448 m2
- glass tube, borosilicate: 5.88711e-5 kg
- hazardous waste, for incineration: -9.29426e-7, -1.16832e-8 kg (2 suppliers, which the file names only by identifier); sum of these -9.41109e-7 kg
- heat carrier liquid, 40% C3H8O2: -3.09262e-11, -3.18516e-5 m3 (2 suppliers, which the file names only by identifier); sum of these -3.18516e-5 m3
- heat storage, 2000l: 5.84129e-6 unit
- heat, central or small-scale, other than natural gas: 0.0045136, 6.19947e-5 MJ (2 suppliers, which the file names only by identifier); sum of these 0.0045756 MJ
- heat, district or industrial, natural gas: 0.000195128, 0.000588919, 9.67744e-6, 1.87125e-8 MJ (4 suppliers, which the file names only by identifier); sum of these 0.000793743 MJ
- hot water tank, 600l: 6.5756e-7 unit
- hydrochloric acid, without water, in 30% solution state: 4.68482e-7 kg
- inert waste, for final disposal: -0.251785 kg
- injection moulding: 3.2451e-5 kg
- municipal solid waste: -1.72272e-10, -4.399e-11, -1.37529e-10, -2.07576e-11, -1.54823e-10, -9.62991e-11, -2.02156e-10, -1.15624e-11, -1.75597e-11, -8.92473e-11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 kg (39 suppliers, which the file names only by identifier); sum of these -1.17742e-7 kg
- polyethylene, high density, granulate: 3.2451e-5 kg
- polyethylene, low density, granulate: 0.0181285 kg
- propylene glycol, liquid: 0.000560533 kg
- pump, 40W: 2.58984e-5 unit
- reinforcing steel: 0.00593587 kg
- selective coat, copper sheet, black chrome: 6.76216e-7 m2
- selective coat, copper sheet, physical vapour deposition: 4.14585e-6 m2
- sheet rolling, aluminium: 0.000340736 kg
- sheet rolling, chromium steel: 0.000389412 kg
- sheet rolling, copper: 1.35153e-5 kg
- sheet rolling, steel: 0.00261231 kg
- silicone product: 2.60736e-7 kg
- soft solder, Sn97Cu3: 3.97615e-8 kg
- solar collector factory: 9.64414e-13 unit
- solar glass, low-iron: 6.16709e-6 kg
- steel, chromium steel 18/8, hot rolled: 0.000408795 kg
- stone wool, packed: 6.68486e-5 kg
- synthetic rubber: 3.26027e-6 kg
- tap water: 4.22947e-7, 1.76257e-5, 6.98989e-7, 3.09022e-7, 1.30428e-6, 0.0002017, 4.58529e-7, 2.54072e-6, 3.51363e-6 kg (9 suppliers, which the file names only by identifier); sum of these 0.000228574 kg
- transport, passenger car: 0.00162255 km
- tube insulation, elastomere: 0.000134371 kg
- waste glass: -1.5274e-10, -8.79696e-9, -2.74856e-9, -5.34359e-10, -1.00291e-8, -2.10717e-8, -8.0103e-9, -2.28624e-7, -5.68879e-8, -1.03683e-8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 kg (42 suppliers, which the file names only by identifier); sum of these -2.81918e-6 kg
- waste glass sheet: -1.27068e-6, -3.86421e-7, -6.33811e-5 kg (3 suppliers, which the file names only by identifier); sum of these -6.50382e-5 kg
- waste mineral wool: -4.98162e-5, -3.91975e-8, -1.69932e-5 kg (3 suppliers, which the file names only by identifier); sum of these -6.68486e-5 kg
- waste paperboard, unsorted: -6.90285e-6, -1.24424e-6, -8.14708e-6 kg (3 suppliers, which the file names only by identifier); sum of these -1.62942e-5 kg
- waste plastic, mixture: -3.93318e-7, -4.27647e-9, -1.98751e-9, -5.73145e-10, -2.09418e-9, -3.83004e-9, -2.32818e-9, -2.66285e-9, -1.5753e-9, -4.50794e-8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 kg (43 suppliers, which the file names only by identifier); sum of these -3.51923e-6 kg
- waste polyethylene/polypropylene product: -7.56323e-5, -2.98336e-5 kg (2 suppliers, which the file names only by identifier); sum of these -0.000105466 kg
- wastewater, average: -1.09077e-9, -1.45642e-8, -4.09063e-6, -9.3475e-7 m3 (4 suppliers, which the file names only by identifier); sum of these -5.04103e-6 m3
- water, completely softened: 0.000549393, 0.00073394 kg (2 suppliers, which the file names only by identifier); sum of these 0.00128333 kg
- wire drawing, copper: 0.000389412 kg
- zinc coat, coils: 5.51668e-5 m2

## Inputs from nature
- Occupation, industrial area [natural resource, land]: 2.57986e-5 m2*year
- Transformation, from unspecified [natural resource, land]: 5.1516e-7 m2
- Transformation, to industrial area [natural resource, land]: 5.1516e-7 m2
- Water, unspecified natural origin [natural resource, in water]: 0.00103213 m3

## Emissions to nature
- Water [air, unspecified]: 0.000155047 m3
- Water [water, unspecified]: 0.000873851 m3
