# transport, passenger car, medium size, liquefied petroleum gas (LPG), EURO 5

Dataset: EcoSpold 2, unit process
Geography: GLO
Time period: 2012-01-01 to 2022-12-31
Technology level: current
Classification: ISIC rev.4 ecoinvent: 4922:Other passenger land transport
Tags: LPG; internal combustion engine
Scenario: Business-as-Usual
System model: Allocation at the point of substitution
Generated by: Eric Johnson
Published in: Atlantic Consulting 2014
Database: ecoinvent
isCopyrightProtected: true

## General comment
This dataset represents the service of transport in a passenger car for a journey length of 1vkm. The data used for the creation of the global datasets are initially based on European data. Fuel consumption and emissions are for average vehicle use. The dataset is parametrized with respect to vehicle size, fuel consumption and vehicle lifetime.
Datasets for three different passenger car categories are available in ecoinvent in view of size: small, medium and large.
The category “small” includes passenger cars with engine size up to 1.4 liters. The average weight of this category is estimated to be 1200 kg.
The category “medium” includes passenger cars with engine size between 1.4 and 2.0 liters. The average weight of this category is estimated to be 1600 kg.
The category “large” includes passenger cars with engine size larger than 2.0 liters. The average weight of this category is estimated to be 2000 kg.
The passenger car size influences the amount of both exhaust and non-exhaust emissions. The exhaust emissions caused by the burning of fuel are divided into two groups: fuel dependent emissions (dependent on fuel type and quantity) and Euro class dependent emissions which reflect the emission standards which the vehicle complies with. Three classes of Euro engine type are considered: Euro 3, Euro 4 and Euro 5. The higher the class (e.g. Euro 5), the lower the emissions and viceversa. The Euro engine regulation is set by the European Commission “in order to limit as much as possible the negative impact of road vehicles on the environment and health” (European Commission 2012). This dataset considers a medium liquified petroleum gas (LPG) passenger car of Euro 5 class. Also included within the direct exchanges to the environment are the fuel evaporation emissions from the fuel tank, relevant to petrol vehicles only.

Non-exhaust emissions are those resulting from tyre, brake and road wear. These emissions are considered as by-products.

## Included activities start
From combustion of fuel in the engine. The dataset takes as input the infrastructure of the car and road network, the materials and efforts needed for maintenance of these and the fuel consumed in the vehicle for the journey.

## Included activities end
The activity ends with the transport over 1vkm and the emissions of exhaust and non-exhaust emissions into air, water and soil.

The dataset includes the construction, operation, maintenance and disposal of the vehicle and road infrastructure. Operation of the vehicle includes all the direct emissions produced by fuel combustion and evaporation as well as from tyre, brake and road wear.

The dataset doesn't specifically model cold start emissions. These are assumed to be included in the data for average driving which was used.

## Technology
Transport in a passenger car with internal combustion engine, fueled by liquified petroleum gas (LPG), sometimes referred to as Autogas. The size is mediim, with engine displacement of 1.6-2.0 litres and an average weight of 1500-1600 kg.
Technology classifications are based on those used widely within the works of the European Environment Agency, particularly in the Emissions Inventory Guidebook. The Tremove model - which is also used to generate fuel consumption and emission factors for the datasets presented here - follows this classification system.

## Parameters
- annual total vkm: 1.31872e11 km; name annual_vkm; = 1.31872E+11; lognormal variance with pedigree 0.0021, pedigree (2,2,2,4,1)
  Input from AEGPL, the LPG trade association
- co2 emissions per kg petrol: 3.18 kg; name co2_kg_petrol; lognormal variance with pedigree 0.0021, pedigree (2,2,2,4,1)
  Constant for all petrol vehicles
- emissions from brake friction: 4.45e-9 kg/kg vehicle; name brake_wear_emissions; lognormal variance with pedigree 0.0021, pedigree (2,2,2,4,1)
  Average (small, medium and large weight class) emissions produced per kg vehicle.
  Calculation of non-exhaust emissions (tyre, brake and road wear emissions as well as petrol evaporation emissions) are based on: Ntziachristos, L., Boulter, P. (2009). EMEP/EEA air pollutant emissions inventory guidebook 2009: Road vehicle tyre and brake wear; Road surface wear. Copenhagen, European Environment Agency
- emissions from road abrasion: 9.79e-9 kg/kg vehicle; name road_wear_emissions; lognormal variance with pedigree 0.0021, pedigree (2,2,2,4,1)
  (same comment as for emissions from brake friction)
- emissions from tyre abrasion: 5.725e-8 kg/kg vehicle; name tyre_wear_emissions; lognormal variance with pedigree 0.0021, pedigree (2,2,2,4,1)
  (same comment as for emissions from brake friction)
- european to global total vkm scaling factor: 5.7 dimensionless; name global_scaling_factor; lognormal variance with pedigree 0.0118, pedigree (3,3,4,4,1)
  Estimation
- fuel consumption constant: 2.9288e-5 dimensionless; name fc_constant; = 2.9288E-05; lognormal variance with pedigree 0.0021, pedigree (2,2,2,4,1)
  Determined from analysing the fuel consumption for vehicles in the Tremove model (2009)
- fuel consumption of basis vehicle: 0.05922 dimensionless; name fc_basis_vehicle; lognormal variance with pedigree 0.0021, pedigree (2,2,2,4,1)
  Fuel consumption as derived from the source data for each vehicle type, size and emissions standard
- gross vehicle weight: 1697.2 kg; name gross_vehicle_weight; = vehicle_weight+LF_passengers; lognormal variance with pedigree 0.0015, pedigree (2,2,2,1,1)
  Weight of vehicle and passengers
- lifetime of the vehicle: 150000 km; name vehicle_lifetime_km; lognormal variance with pedigree 0.0021, pedigree (2,2,2,4,1)
  Distance capacity in the assumed vehicle lifetime.
  Reference: Spielmann (2007) ecoinvent report 14. Ecoinvent centre, Dübendorf.
- passenger load factor: 97.2 kg; name LF_passengers; = passengers*60; lognormal variance with pedigree 0.0021, pedigree (2,2,2,4,1)
  Number of passengers multiplied by 60 kg per passenger
- passengers: 1.62 unit; lognormal variance with pedigree 0.0021, pedigree (2,2,2,4,1)
  Average number of passengers in passenger car 1.62
- scaling factor: 1.29032 dimensionless; name scaling_factor; = (vehicle_weight/basis_vehicle_weight); lognormal variance with pedigree 0.0021, pedigree (2,2,2,4,1)
  The mass of a vehicle influences a range of different exchanges. These are fuel consumption (and thus fuel dependant emissions), non-exhaust emissions and vehicle and road infrastructures. For the infrastructres a scaling factor is used to extrapolate the values appropriate to the basis vehicle. The scaling factor is given by vehicle weight divided by the basis vehicle weight (1240kg).
- so2 emissions per kg petrol: 2e-5 kg; name so2_kg_petrol; = 2.0e-5; lognormal variance with pedigree 0.0021, pedigree (2,2,2,4,1)
  Constant for all petrol vehicles
- weight of the basis vehicle: 1240 kg/unit; name basis_vehicle_weight; lognormal variance with pedigree 0.0021, pedigree (2,2,2,4,1)
  The basis vehicle is the one on which the original life cycle inventory was conducted. It is representative of a VW Golf.
- weight of the vehicle: 1600 kg/unit; name vehicle_weight; lognormal variance with pedigree 0.0021, pedigree (2,2,2,4,1)
  Empty vehicle weight (curb weight) according to each vehicle class used: small cars (<1.4 litres) 1200kg;
  medium size cars (1.4 - 2.0 litres) 1600kg;
  large size cars (>2.0 litres) 2000kg

## Reference product
- transport, passenger car, medium size, liquefied petroleum gas, EURO 5: 1 km; By-product classification allocatable product; CPC 64119: Other land transportation services of passengers, n.e.c.
  production volume 1.1e6 km
    2014 estimate by the World LPG Association (Paris)
  property price 0.142854 EUR2005
    Calculated based on inputs: The price of the product has been calculated as a sum of the values of the material and energy inputs for this product. This value is therefore a rough estimation. It may underestimate the real price since there are additional expenses when producing any product. These expences can include for example labour costs, treatment of waste materials and profit for the producer. Please consider carefully whether this level of data quality is acceptable for your application.
  properties: carbon allocation 0 kg, carbon content 0

## Inputs from technosphere
- brake wear emissions, passenger car: -7.55254e-6 kg; name brake_emissions; = brake_wear_emissions* gross_vehicle_weight; source Ntziachristos, L. 2009; lognormal variance with pedigree 0.0021, pedigree (2,2,2,4,1)
  Quantity of emissions based on values from Ntziachristos, L., Boulter, P. (2009) EMEP/EEA air pollutant emissions inventory guidebook 2009: Road vehicle tyre and brake wear; Road surface wear. Copenhagen, European Environment Agency. Quantities given in the source assumed to represent medium sized vehicles. Quantities for small and large vehicles taken from the bounds of the ranges given.
  production volume
    Calculated from production volume of reference product using the relative outputs.
- liquefied petroleum gas: 0.057847 kg; source Atlantic Consulting 2014; lognormal variance with pedigree 0.0107, pedigree (3,2,4,1,1)
  Quantitiy is back-calculated from emissions of CO2, CO and hydrocarbons, using the same method as in: Simons, A; Road Transport: new life cycle inventories for fossil-fuelled passenger cars and non-exhause emissions in ecoinvent v3, Int J Life Cycle Assess, DOI 10.1007/s11367-013-0642-9
  properties: carbon content, fossil 0.821863, dry mass 1 kg, heating value, net 45.5 MJ, wet mass 1 kg
  note on heating value, net: Indicative value. Reference: Fuels - Higher and Lower Calorific Values, available at: https://www.engineeringtoolbox.com/fuels-higher-calorific-values-d_169.html
- passenger car maintenance: 8.60215e-6 unit; = (1/vehicle_lifetime_km)*scaling_factor; source Spielmann M. 2007; lognormal variance with pedigree 0.0419, pedigree (2,2,5,4,1)
  The dataset is for a medium size passenger car. In order to make the demand appropriate to the particular vehicle in question a scaling factor is applied which is the product of the vehicle weight devided by the weight of the medium size vehicle.
- passenger car, petrol/natural gas: 0.0106667 kg; name passenger_car; = (1/vehicle_lifetime_km)*vehicle_weight; source Spielmann M. 2007; lognormal variance with pedigree 0.0419, pedigree (2,2,5,4,1)
  The dataset is calculated from the LCI of VW Golf. The infrastructure demand is scaled according to the weight of the specific vehicle in question.
- road: 0.000911396 m*year; name road_use; = 5.37E-07*gross_vehicle_weight; source Spielmann M. 2007; lognormal variance with pedigree 0.0419, pedigree (2,2,5,4,1)
  This input indicates the unit of road per vkm used during the transport activity.
  The road input is composed by two demand factors:
  - Road infrastructure and disposal (RI&D), which varies according to the gross vehicle weight.
  - Road operations & maintenance (RO&M), which does not vary according to the gross vehicle weight.
- road maintenance: 6.00738e-6, 0.00025942 m*year (2 suppliers, which the file names only by identifier); sum of these 0.000265427 m*year; lognormal variance with pedigree 0.0419, pedigree (2,2,5,4,1)
  This input indicates the unit of road per vkm used during the transport activity. The road input is composed by two demand factors: - Road infrastructure and disposal (RI&D), which varies according to the gross vehicle weight. - Road operations & maintenance (RO&M), which does not vary according to the gross vehicle weight.
- road wear emissions, passenger car: -1.66156e-5 kg; name road_emissions; = road_wear_emissions* gross_vehicle_weight; source Ntziachristos, L. 2009; lognormal variance with pedigree 0.0021, pedigree (2,2,2,4,1)
  (same comment as for brake wear emissions, passenger car)
  production volume
    Calculated from production volume of reference product using the relative outputs.
- tyre wear emissions, passenger car: -9.71647e-5 kg; name tyre_emissions; = tyre_wear_emissions*gross_vehicle_weight; source Ntziachristos, L. 2009; lognormal variance with pedigree 0.0021, pedigree (2,2,2,4,1)
  (same comment as for brake wear emissions, passenger car)
  production volume
    Calculated from production volume of reference product using the relative outputs.

## Emissions to nature
- 1-Pentene [air, urban air close to ground]: 2.457e-8 kg; source Ntziachristos, L. 2009; lognormal variance with pedigree 0.0419, pedigree (2,2,5,4,1)
  Emissions dependent on engine Euro class (Euro 3, Euro 4 and Euro 5).
- 2-Methylpentane [air, urban air close to ground]: 7.417e-6 kg; source Mellios, G. 2009; lognormal variance with pedigree 0.0419, pedigree (2,2,5,4,1)
  petrol evaporation emissions
- Acetaldehyde [air, urban air close to ground]: 1.675e-7 kg; source Ntziachristos, L. 2009; lognormal variance with pedigree 0.0419, pedigree (2,2,5,4,1)
  Emissions dependent on engine Euro class (Euro 3, Euro 4 and Euro 5).
- Acetone [air, urban air close to ground]: 1.363e-7 kg; source Ntziachristos, L. 2009; lognormal variance with pedigree 0.0419, pedigree (2,2,5,4,1)
  Emissions dependent on engine Euro class (Euro 3, Euro 4 and Euro 5).
- Acrolein [air, urban air close to ground]: 4.245e-8 kg; source Ntziachristos, L. 2009; lognormal variance with pedigree 0.0419, pedigree (2,2,5,4,1)
  Emissions dependent on engine Euro class (Euro 3, Euro 4 and Euro 5).
- Ammonia [air, urban air close to ground]: 1.862e-6 kg; source Ntziachristos, L. 2009; lognormal variance with pedigree 0.0419, pedigree (2,2,5,4,1)
  Estimated value. Assumed to be the same as for petrol.
- Benzaldehyde [air, urban air close to ground]: 4.915e-8 kg; source Ntziachristos, L. 2009; lognormal variance with pedigree 0.0419, pedigree (2,2,5,4,1)
  Emissions dependent on engine Euro class (Euro 3, Euro 4 and Euro 5).
- Benzene [air, urban air close to ground]: 3.715e-6 kg; source Ntziachristos, L. 2009; lognormal variance with pedigree 0.0419, pedigree (2,2,5,4,1)
  emissions dependent on engine Euro class (Euro 3, Euro 4 and Euro 5). Includes petrol evaporation.
- Butane [air, urban air close to ground]: 7.371e-6 kg; source Ntziachristos, L. 2009; lognormal variance with pedigree 0.0419, pedigree (2,2,5,4,1)
  (same comment as for Benzene)
- Cadmium II [air, urban air close to ground]: 6.20668e-10 kg; source Ntziachristos, L. 2009; lognormal variance with pedigree 0.0419, pedigree (2,2,5,4,1)
  Estimated value. Assumed to be the same as for petrol.
- Carbon dioxide, fossil [air, urban air close to ground]: 0.172339 kg; source Atlantic Consulting 2014; lognormal variance with pedigree 0.0084, pedigree (1,2,4,1,1)
  Taken from analysis of KBA database
- Carbon monoxide, fossil [air, urban air close to ground]: 0.000665299 kg; source Atlantic Consulting 2014; lognormal variance with pedigree 0.0312, pedigree (1,2,4,1,1)
  Taken from analysis of KBA database
- Chromium III [air, urban air close to ground]: 3.10334e-9 kg; source Ntziachristos, L. 2009; lognormal variance with pedigree 0.0419, pedigree (2,2,5,4,1)
  Estimated value. Assumed to be the same as for petrol.
- Chromium VI [air, urban air close to ground]: 6.20668e-12 kg; source Ntziachristos, L. 2009; lognormal variance with pedigree 0.0419, pedigree (2,2,5,4,1)
  Estimated value. Assumed to be the same as for petrol.
- Copper ion [air, urban air close to ground]: 1.05514e-7 kg; source Ntziachristos, L. 2009; lognormal variance with pedigree 0.0419, pedigree (2,2,5,4,1)
  Estimated value. Assumed to be the same as for petrol.
- Cyclohexane (for all cycloalkanes) [air, urban air close to ground]: 2.547e-7 kg; source Ntziachristos, L. 2009; lognormal variance with pedigree 0.0419, pedigree (2,2,5,4,1)
  Emissions dependent on engine Euro class (Euro 3, Euro 4 and Euro 5).
- Dinitrogen monoxide [air, urban air close to ground]: 8.06868e-6 kg; source Ntziachristos, L. 2009; lognormal variance with pedigree 0.0419, pedigree (2,2,5,4,1)
  Estimated value. Assumed to be the same as for petrol.
- Ethane [air, urban air close to ground]: 1.03e-6 kg; source Ntziachristos, L. 2009; lognormal variance with pedigree 0.0419, pedigree (2,2,5,4,1)
  (same comment as for Benzene)
- Ethylene [air, urban air close to ground]: 2.645e-8 kg; source Mellios, G. 2009; lognormal variance with pedigree 0.0419, pedigree (2,2,5,4,1)
  petrol evaporation emissions
- Ethylene oxide [air, urban air close to ground]: 1.631e-6 kg; source Ntziachristos, L. 2009; lognormal variance with pedigree 0.0419, pedigree (2,2,5,4,1)
  Emissions dependent on engine Euro class (Euro 3, Euro 4 and Euro 5).
- Formaldehyde [air, urban air close to ground]: 3.798e-7 kg; source Ntziachristos, L. 2009; lognormal variance with pedigree 0.0419, pedigree (2,2,5,4,1)
  Emissions dependent on engine Euro class (Euro 3, Euro 4 and Euro 5).
- Heptane [air, urban air close to ground]: 1.653e-7 kg; source Ntziachristos, L. 2009; lognormal variance with pedigree 0.0419, pedigree (2,2,5,4,1)
  Emissions dependent on engine Euro class (Euro 3, Euro 4 and Euro 5).
- Hexane [air, urban air close to ground]: 3.597e-7 kg; source Ntziachristos, L. 2009; lognormal variance with pedigree 0.0419, pedigree (2,2,5,4,1)
  Emissions dependent on engine Euro class (Euro 3, Euro 4 and Euro 5).
- Lead II [air, urban air close to ground]: 9.31002e-11 kg; source Ntziachristos, L. 2009; lognormal variance with pedigree 0.0419, pedigree (2,2,5,4,1)
  Estimated value. Assumed to be the same as for petrol.
- Mercury II [air, urban air close to ground]: 4.34468e-12 kg; source Ntziachristos, L. 2009; lognormal variance with pedigree 0.0419, pedigree (2,2,5,4,1)
  Estimated value. Assumed to be the same as for petrol.
- Methane, fossil [air, urban air close to ground]: 1.35556e-5 kg; source Atlantic Consulting 2014; lognormal variance with pedigree 0.0419, pedigree (2,2,5,4,1)
  Taken from analysis of KBA database
- Methyl ethyl ketone [air, urban air close to ground]: 1.117e-8 kg; source Ntziachristos, L. 2009; lognormal variance with pedigree 0.0419, pedigree (2,2,5,4,1)
  Emissions dependent on engine Euro class (Euro 3, Euro 4 and Euro 5).
- NMVOC, non-methane volatile organic compounds [air, urban air close to ground]: 5.98195e-5 kg; source Atlantic Consulting 2014; lognormal variance with pedigree 0.0138, pedigree (1,2,4,1,1)
  Taken from analysis of KBA database
- Nickel II [air, urban air close to ground]: 4.34468e-9 kg; source Ntziachristos, L. 2009; lognormal variance with pedigree 0.0419, pedigree (2,2,5,4,1)
  Estimated value. Assumed to be the same as for petrol.
- Nitrogen oxides [air, urban air close to ground]: 3.38217e-5 kg; source TREMOVE 2007; lognormal variance with pedigree 0.0648, pedigree (1,2,4,1,1)
  Taken from analysis of KBA database
- PAH, polycyclic aromatic hydrocarbons [air, urban air close to ground]: 2.15992e-9 kg; source Ntziachristos, L. 2009; lognormal variance with pedigree 0.0419, pedigree (2,2,5,4,1)
  Estimated value. Assumed to be the same as for petrol.
- Particulate Matter, < 2.5 um [air, urban air close to ground]: 1.06e-7 kg; source Atlantic Consulting 2014; lognormal variance with pedigree 0.0419, pedigree (2,2,5,4,1)
  Estimated value. Assumed to be one order of magnitude lower than for petrol.
- Pentane [air, urban air close to ground]: 8.648e-6 kg; source Ntziachristos, L. 2009; lognormal variance with pedigree 0.0419, pedigree (2,2,5,4,1)
  (same comment as for Benzene)
- Propane [air, urban air close to ground]: 5.594e-6 kg; source Ntziachristos, L. 2009; lognormal variance with pedigree 0.0419, pedigree (2,2,5,4,1)
  (same comment as for Benzene)
- Propene [air, urban air close to ground]: 1.481e-7 kg; source Mellios, G. 2009; lognormal variance with pedigree 0.0419, pedigree (2,2,5,4,1)
  petrol evaporation emissions
- Propylene oxide [air, urban air close to ground]: 8.534e-7 kg; source Ntziachristos, L. 2009; lognormal variance with pedigree 0.0419, pedigree (2,2,5,4,1)
  Emissions dependent on engine Euro class (Euro 3, Euro 4 and Euro 5).
- Selenium IV [air, urban air close to ground]: 6.20668e-10 kg; source Ntziachristos, L. 2009; lognormal variance with pedigree 0.0419, pedigree (2,2,5,4,1)
  Estimated value. Assumed to be the same as for petrol.
- Styrene [air, urban air close to ground]: 2.256e-7 kg; source Ntziachristos, L. 2009; lognormal variance with pedigree 0.0419, pedigree (2,2,5,4,1)
  Emissions dependent on engine Euro class (Euro 3, Euro 4 and Euro 5).
- Sulfur dioxide [air, urban air close to ground]: 1.24134e-7 kg; source TREMOVE 2007; lognormal variance with pedigree 0.0419, pedigree (2,2,5,4,1)
  Estimated value. Assumed to be the same as for petrol.
- Toluene [air, urban air close to ground]: 7.339e-6 kg; source Ntziachristos, L. 2009; lognormal variance with pedigree 0.0419, pedigree (2,2,5,4,1)
  (same comment as for Benzene)
- Zinc II [air, urban air close to ground]: 6.20668e-8 kg; source Ntziachristos, L. 2009; lognormal variance with pedigree 0.0419, pedigree (2,2,5,4,1)
  Estimated value. Assumed to be the same as for petrol.
- m-Xylene [air, urban air close to ground]: 3.171e-6 kg; source Ntziachristos, L. 2009; lognormal variance with pedigree 0.0419, pedigree (2,2,5,4,1)
  (same comment as for Benzene)
- o-Xylene [air, urban air close to ground]: 7.387e-7 kg; source Ntziachristos, L. 2009; lognormal variance with pedigree 0.0419, pedigree (2,2,5,4,1)
  (same comment as for Benzene)

## Sampling procedure
For the regulated pollutants and the fuel consumption, the data are taken from type-approval dynamometer testing of some 9000 automobiles running on LPG, petrol and diesel. The other emissions are taken from the analagous petrol Euro 5 passenger car in ecoinvent.
