# treatment of waste gypsum, sanitary landfill

Dataset: EcoSpold 2, unit process
Geography: Europe without Switzerland
Time period: 1994-01-01 to 2022-12-31
Technology level: current
Classification: ISIC rev.4 ecoinvent: 3821:Treatment and disposal of non-hazardous waste
Classification: EcoSpold01Categories: waste management/sanitary landfill
Synonyms: alabaster; natural gypsum (has CAS 13397-24-5; selenite; calcium sulfate dihydrate (has CAS 10101-41-4)
Tags: Treatment
Scenario: Business-as-Usual
System model: Allocation at the point of substitution
Generated by: [System]
Database: ecoinvent
isCopyrightProtected: true

## General comment
Inventoried waste contains 100% Gypsum natural; .
waste composition (wet, in ppm): H2O 193990; O 375050; H n.a.; C n.a.; S 187520; N n.a.; P n.a.; B n.a.; Cl 404.15; Br n.a.; F 505.18; I n.a.; Ag n.a.; As 1.9702; Ba n.a.; Cd 0.095985; Co n.a.; Cr 7.5777; Cu 7.1736; Hg 0.11114; Mn n.a.; Mo n.a.; Ni 7.9415; Pb 2.238; Sb n.a.; Se n.a.; Sn n.a.; V n.a.; Zn 14.095; Be n.a.; Sc n.a.; Sr n.a.; Ti n.a.; Tl n.a.; W n.a.; Si n.a.; Fe n.a.; Ca 242490; Al n.a.; K n.a.; Mg n.a.; Na n.a.;
Share of carbon in waste that is biogenic 60.4%.
Overall degradability of waste during 100 years: 100%.

## Included activities end
Waste-specific short-term emissions to air via landfill gas incineration and landfill leachate. Burdens from treatment of short-term leachate (0-100a) in wastewater treatment plant (including WWTP sludge disposal in municipal incinerator). Long-term emissions from landfill to groundwater (after base lining failure).

## Technology
Swiss municipal sanitary landfill for biogenic or untreated municipal waste ('reactive organic landfill'). Landfill gas and leachate collection system. Recultivation and monitoring for 150 years after closure.

## Reference product
- waste gypsum: -1 kg; name RP; By-product classification Waste; CPC 39: Wastes or scraps; CAS 13397-24-5
  production volume 4.3092e9 kg
    Estimated value. EU production of gypsum in 2014 was of 43202668 tonnes (BGS 2016). The waste generation is estimated to be 15% (taken from the estimated value for gypsum (WRAP, n.d)). Reta of recycling is assumed to 5% (Marlet n.d.), of the remaining 70% of waste goes to inert material landfill, and 30% goes directly to sanitary landfill.
    References:
    BGS (2016) World Mineral Production 2010-2014.
    Marlet, C. (n.d.) GtoG - GtoG: From Production to Recycling, a Circular Economy for the European Gypsum Industry with the Demolition and Recycling Industry LIFE11 ENV/BE/001039
    WRAP (n.d.) International practice in plasterboard recycling: Canada. Retrieved from: http://www.wrap.org.uk/sites/files/wrap/Case%20study%20-%20Plasterboard%20recycling%20in%20Canada.pdf, accessed 3 May 2016
  property heating value, net 0 MJ
    Non combustible products are assumed to have an LHV equal to zero (0).
  property price 0 EUR2005
    Waste products are assigned a price of zero as they are assumed to require further treatment.
  properties: carbon allocation 0 kg, carbon content 0, carbon content, fossil 0, carbon content, non-fossil 0, dry mass 0.806 kg, water content 0.240695, water in wet mass 0.194 kg, wet mass 1 kg

## Inputs from technosphere
- cement, unspecified: 0.000237 kg; lognormal variance with pedigree 0.232, pedigree (1,1,5,5,1)
  burden from incineration of sludge from wastewater treatment of the short-term leachate (0-100a). uncertainty is calculated from uncertainties in waste composition and transfer coefficients in incinerator and uncertainty of waste decomposition and short-term leaching in sanitary landfill
  properties: dry mass 1 kg, wet mass 1 kg
- chemical, inorganic: 3.14e-10 kg; lognormal variance with pedigree 1.202, pedigree (1,1,5,5,1)
  (same comment as for cement, unspecified)
  properties: carbon content, fossil 0.003, dry mass 1 kg, wet mass 1 kg
  note on carbon content, fossil: This dataset is an unweighted average of 20 inorganic substances (listed in Tab 88.1, ecoinvent v2.2 report 8, part II), being part of the top100 chemicals included in this database. The C-content has also been calculated as an unweighted average of the C content of the substances composing this dataset.
- chemical, organic: 4.21e-8 kg; lognormal variance with pedigree 1.532, pedigree (1,1,5,5,1)
  (same comment as for cement, unspecified)
  properties: carbon content, fossil 0.628, dry mass 1 kg, heating value, net 19.03 MJ, wet mass 1 kg
  note on carbon content, fossil: This dataset is an unweighted average of 20 organic substances (listed in Tab 88.1, ecoinvent v2.2 report 8, part II), being part of the top100 chemicals included in this database. The C-content has also been calculated as an unweighted average of the C content of the substances composing this dataset.
- electricity, high voltage: 0.00126 kWh; lognormal variance with pedigree 0.632, pedigree (1,1,5,5,1)
  (same comment as for cement, unspecified)
- electricity, low voltage: 0.00146 kWh; lognormal variance with pedigree 0.35, pedigree (5,5,5,5,5)
  burden from wastewater treatment of the short-term leachate (0-100a). Uncertainty calculated from unertainty of the waste composition of this waste, uncertainty in waste decomposition and short-term leaching in sanitary landfill
- heat, central or small-scale, other than natural gas: 0.0029422 MJ; lognormal variance with pedigree 0.37, pedigree (5,5,5,5,5)
  (same comment as for electricity, low voltage)
  properties: heating value, net 1 MJ
- heat, district or industrial, natural gas: 0.0040512 MJ; lognormal variance with pedigree 0.37, pedigree (5,5,5,5,5)
  (same comment as for electricity, low voltage)
  properties: heating value, net 1 MJ
- heat, district or industrial, other than natural gas: 0.00737 MJ; lognormal variance with pedigree 0.192, pedigree (1,1,5,5,1)
  (same comment as for cement, unspecified)
  properties: heating value, net 1 MJ
- hydrochloric acid, without water, in 30% solution state: 1.88e-10 kg; lognormal variance with pedigree 1.202, pedigree (1,1,5,5,1)
  (same comment as for cement, unspecified)
  properties: dry mass 1 kg, heating value, net 3.32 MJ, wet mass 1 kg
- iron (III) chloride, without water, in 40% solution state: 5.72e-8 kg; lognormal variance with pedigree 1.202, pedigree (1,1,5,5,1)
  (same comment as for cement, unspecified)
  properties: dry mass 1 kg, wet mass 1 kg
- municipal waste incineration facility: 2.2e-12 unit; lognormal variance with pedigree 0.192, pedigree (1,1,5,5,1)
  Burden from incineration of sludge from wastewater treatment of the short-term leachate (0-100a).
- process-specific burdens, municipal waste incineration: 0.00879 kg; lognormal variance with pedigree 0.192, pedigree (1,1,5,5,1)
  Burden from incineration of sludge from wastewater treatment of the short-term leachate (0-100a).;activityLink introduced to establish a direct link to the corresponding regional supply of this product
- process-specific burdens, residual material landfill: 0.000593 kg; lognormal variance with pedigree 0.222, pedigree (1,1,5,5,1)
  burden from incineration of sludge from wastewater treatment of the short-term leachate (0-100a). uncertainty is calculated from uncertainties in waste composition and transfer coefficients in incinerator and uncertainty of waste decomposition and short-term leaching in sanitary landfill;activityLink introduced to establish a direct link to the corresponding regional supply of this product
- process-specific burdens, sanitary landfill: 1 kg; lognormal variance with pedigree 0.042, pedigree (1,1,5,5,1)
  demands per kilogram waste. uncertainty is heeded in the module
- process-specific burdens, slag landfill: 0.0037 kg; lognormal variance with pedigree 0.222, pedigree (1,1,5,5,1)
  (same comment as for process-specific burdens, residual material landfill)
- residual material landfill: 1.24e-12 unit; lognormal variance with pedigree 0.222, pedigree (1,1,5,5,1)
  (same comment as for cement, unspecified)
- sanitary landfill facility: 5.56e-10 unit; lognormal variance with pedigree 0.042, pedigree (1,1,5,5,1)
  demands per kilogram waste. uncertainty is heeded in the module
- sewer grid, 5E9l/year, 110 km: 5.45e-10 km; lognormal variance with pedigree 0.2106, pedigree (5,5,5,5,5)
  (same comment as for electricity, low voltage)
- slag landfill: 6.57e-12 unit; lognormal variance with pedigree 0.222, pedigree (1,1,5,5,1)
  (same comment as for cement, unspecified)
- waste cement, hydrated: -0.000593 kg; name waste_cement; lognormal variance with pedigree 0.192, pedigree (1,1,1,5,1)
  (same comment as for cement, unspecified)
  production volume
    Calculated from the production volume of waste gypsum, 19.4% water in proportion to the respective output amounts.
  properties: dry mass 1 kg, wet mass 1 kg
- waste graphical paper: -3.88e-5 kg; name waste_graphicalp; lognormal variance with pedigree 0.2106, pedigree (5,5,5,5,5)
  (same comment as for electricity, low voltage)
  production volume
    (same comment as for waste cement, hydrated)
  properties: carbon content, non-fossil 0.454955, dry mass 0.888 kg, heating value, net 14.12 MJ, water content 0.126126, wet mass 1 kg
  note on heating value, net: Value taken from the general comment of the treatment dataset.
- waste plastic, mixture: -3.88e-5 kg; name waste_plastic; lognormal variance with pedigree 0.2106, pedigree (5,5,5,5,5)
  (same comment as for electricity, low voltage)
  production volume
    (same comment as for waste cement, hydrated)
  properties: carbon content, fossil 0.747344, dry mass 0.847 kg, heating value, net 30.79 MJ, water content 0.180638, wet mass 1 kg
  note on carbon content, fossil: C content in 1 kg DM was calculated using data in Tab A.2, ecoinvent v2.2 report 13_I
- wastewater treatment facility, capacity 5E9l/year: 1.42e-11 unit; lognormal variance with pedigree 0.2106, pedigree (5,5,5,5,5)
  (same comment as for electricity, low voltage)

## Emissions to nature
- Arsenic ion [air, non-urban air or from high stacks]: 4.96e-9 kg; lognormal variance with pedigree 2.062, pedigree (1,1,5,5,1)
  burden from direct release or incineration of landfill biogas. Uncertainty calculated from unertainty of the waste composition of this waste, uncertainty in waste decomposition and short-term leaching in sanitary landfill
- Arsenic ion [air, urban air close to ground]: 9.96e-11 kg; lognormal variance with pedigree 1.632, pedigree (1,1,5,5,1)
  Emissions from short-term leachate treatment and incineration of resulting sludge. Uncertainty calculated depending on waste input and uncertainty of transfer coefficents in landfill, wastewater treatment and incineration model.
- Cadmium II [air, non-urban air or from high stacks]: 1.13e-10 kg; lognormal variance with pedigree 2.592, pedigree (1,1,5,5,1)
  (same comment as for Arsenic ion)
- Cadmium II [air, urban air close to ground]: 4.62e-13 kg; lognormal variance with pedigree 2.102, pedigree (1,1,5,5,1)
  (same comment as for Arsenic ion)
- Calcium [air, non-urban air or from high stacks]: 7.89e-6 kg; lognormal variance with pedigree 1.202, pedigree (1,1,5,5,1)
  (same comment as for Arsenic ion)
- Calcium [air, urban air close to ground]: 5.16e-6 kg; lognormal variance with pedigree 0.222, pedigree (1,1,5,5,1)
  (same comment as for Arsenic ion)
- Carbon monoxide, fossil [air, urban air close to ground]: 1.96e-6 kg; lognormal variance with pedigree 0.842, pedigree (1,1,5,5,1)
  (same comment as for Arsenic ion)
- Chromium III [air, non-urban air or from high stacks]: 2.16e-11 kg; lognormal variance with pedigree 2.772, pedigree (1,1,5,5,1)
  (same comment as for Arsenic ion)
- Chromium III [air, urban air close to ground]: 3.15e-15 kg; lognormal variance with pedigree 1.812, pedigree (1,1,5,5,1)
  (same comment as for Arsenic ion)
- Copper ion [air, non-urban air or from high stacks]: 1e-11 kg; lognormal variance with pedigree 2.872, pedigree (1,1,5,5,1)
  (same comment as for Arsenic ion)
- Copper ion [air, urban air close to ground]: 1.92e-13 kg; lognormal variance with pedigree 1.872, pedigree (1,1,5,5,1)
  (same comment as for Arsenic ion)
- Hydrochloric acid [air, non-urban air or from high stacks]: 5.74e-6 kg; lognormal variance with pedigree 1.142, pedigree (1,1,5,5,1)
  (same comment as for Arsenic ion)
- Hydrogen fluoride [air, non-urban air or from high stacks]: 0.000201 kg; lognormal variance with pedigree 0.812, pedigree (1,1,5,5,1)
  (same comment as for Arsenic ion)
- Lead II [air, non-urban air or from high stacks]: 4.4e-12 kg; lognormal variance with pedigree 2.982, pedigree (1,1,5,5,1)
  (same comment as for Arsenic ion)
- Lead II [air, urban air close to ground]: 4.36e-13 kg; lognormal variance with pedigree 2.002, pedigree (1,1,5,5,1)
  (same comment as for Arsenic ion)
- Mercury II [air, non-urban air or from high stacks]: 3.05e-9 kg; lognormal variance with pedigree 2.142, pedigree (1,1,5,5,1)
  (same comment as for Arsenic ion)
- Mercury II [air, urban air close to ground]: 1.29e-14 kg; lognormal variance with pedigree 2.102, pedigree (1,1,5,5,1)
  (same comment as for Arsenic ion)
- Methane, fossil [air, urban air close to ground]: 5.61e-8 kg; lognormal variance with pedigree 0.242, pedigree (1,1,5,5,1)
  (same comment as for Arsenic ion)
- Nickel II [air, non-urban air or from high stacks]: 1.15e-10 kg; lognormal variance with pedigree 2.552, pedigree (1,1,5,5,1)
  (same comment as for Arsenic ion)
- Nickel II [air, urban air close to ground]: 7.84e-15 kg; lognormal variance with pedigree 1.622, pedigree (1,1,5,5,1)
  (same comment as for Arsenic ion)
- Sulfur dioxide [air, non-urban air or from high stacks]: 0.0245 kg; lognormal variance with pedigree 0.272, pedigree (1,1,5,5,1)
  (same comment as for Arsenic ion)
- Zinc II [air, non-urban air or from high stacks]: 1.48e-10 kg; lognormal variance with pedigree 2.522, pedigree (1,1,5,5,1)
  (same comment as for Arsenic ion)
- Zinc II [air, urban air close to ground]: 7.54e-12 kg; lognormal variance with pedigree 1.522, pedigree (1,1,5,5,1)
  (same comment as for Arsenic ion)
- Arsenic ion [water, ground-, long-term]: 1.65e-6 kg; lognormal variance with pedigree 1.482, pedigree (1,1,5,5,1)
  Emissions from long-term leachate (>100a) directly from MSW landfill and indirectly via incineration of treatement sludge from leachate treatement. Uncertainty calculated depending on waste input and uncertainty of long-term transfer coefficents in landfill.
- Arsenic ion [water, surface water]: 3.12e-7 kg; lognormal variance with pedigree 1.592, pedigree (1,1,5,5,1)
  (same comment as for Arsenic ion)
- Cadmium II [water, ground-, long-term]: 7.91e-8 kg; lognormal variance with pedigree 2.202, pedigree (1,1,5,5,1)
  (same comment as for Arsenic ion)
- Cadmium II [water, surface water]: 8.58e-9 kg; lognormal variance with pedigree 2.042, pedigree (1,1,5,5,1)
  (same comment as for Arsenic ion)
- Calcium II [water, ground-, long-term]: 0.214 kg; lognormal variance with pedigree 0.092, pedigree (1,1,5,5,1)
  (same comment as for Arsenic ion)
- Calcium II [water, surface water]: 0.0285 kg; lognormal variance with pedigree 0.192, pedigree (1,1,5,5,1)
  (same comment as for Arsenic ion)
- Chloride [water, ground-, long-term]: 4.04e-13 kg; lognormal variance with pedigree 2.742, pedigree (1,1,5,5,1)
  (same comment as for Arsenic ion)
- Chloride [water, surface water]: 0.000399 kg; lognormal variance with pedigree 0.822, pedigree (1,1,5,5,1)
  Emissions from short-term leachate treatment. Uncertainty calculated depending on waste input and uncertainty of transfer coefficents in landfill and wastewater treatment.
- Chromium III [water, surface water]: 1.36e-10 kg; lognormal variance with pedigree 1.722, pedigree (1,1,5,5,1)
  (same comment as for Arsenic ion)
- Chromium VI [water, ground-, long-term]: 3.84e-8 kg; lognormal variance with pedigree 8.642, pedigree (1,1,5,5,1)
  (same comment as for Arsenic ion)
- Chromium VI [water, surface water]: 4.52e-8 kg; lognormal variance with pedigree 1.692, pedigree (1,1,5,5,1)
  (same comment as for Arsenic ion)
- Copper ion [water, ground-, long-term]: 7.16e-6 kg; lognormal variance with pedigree 1.352, pedigree (1,1,5,5,1)
  (same comment as for Arsenic ion)
- Copper ion [water, surface water]: 9.11e-9 kg; lognormal variance with pedigree 1.812, pedigree (1,1,5,5,1)
  (same comment as for Arsenic ion)
- Fluoride [water, ground-, long-term]: 0.000277 kg; lognormal variance with pedigree 0.802, pedigree (1,1,5,5,1)
  (same comment as for Arsenic ion)
- Fluoride [water, surface water]: 3.71e-5 kg; lognormal variance with pedigree 0.942, pedigree (1,1,5,5,1)
  (same comment as for Chloride)
- Hydrogen sulfide [water, ground-, long-term]: 0.00768 kg; lognormal variance with pedigree 0.122, pedigree (1,1,5,5,1)
  (same comment as for Arsenic ion)
- Lead II [water, ground-, long-term]: 2.23e-6 kg; lognormal variance with pedigree 1.572, pedigree (1,1,5,5,1)
  (same comment as for Arsenic ion)
- Lead II [water, surface water]: 1.45e-9 kg; lognormal variance with pedigree 1.942, pedigree (1,1,5,5,1)
  (same comment as for Arsenic ion)
- Mercury II [water, ground-, long-term]: 1.01e-7 kg; lognormal variance with pedigree 1.872, pedigree (1,1,5,5,1)
  (same comment as for Arsenic ion)
- Mercury II [water, surface water]: 2.41e-9 kg; lognormal variance with pedigree 2.052, pedigree (1,1,5,5,1)
  (same comment as for Arsenic ion)
- Nickel II [water, ground-, long-term]: 7.65e-6 kg; lognormal variance with pedigree 1.302, pedigree (1,1,5,5,1)
  (same comment as for Arsenic ion)
- Nickel II [water, surface water]: 2.8e-7 kg; lognormal variance with pedigree 1.512, pedigree (1,1,5,5,1)
  (same comment as for Arsenic ion)
- Sulfate [water, ground-, long-term]: 0.295 kg; lognormal variance with pedigree 0.122, pedigree (1,1,5,5,1)
  (same comment as for Arsenic ion)
- Sulfate [water, surface water]: 0.213 kg; lognormal variance with pedigree 0.142, pedigree (1,1,5,5,1)
  (same comment as for Chloride)
- Zinc II [water, ground-, long-term]: 1.11e-5 kg; lognormal variance with pedigree 1.272, pedigree (1,1,5,5,1)
  (same comment as for Arsenic ion)
- Zinc II [water, surface water]: 2.06e-7 kg; lognormal variance with pedigree 1.462, pedigree (1,1,5,5,1)
  (same comment as for Arsenic ion)

## Sampling procedure
Landfill model based on observed leachate concentrations in literature. Extrapolated to 60'000 years heeding chemical characteristics. Initial waste composition from various literature sources.

## Extrapolations
This dataset has been copied from an original dataset covering the geography CH. The uncertainty has been adjusted accordingly.

## Review by Niels Jungbluth 2003-08-30
Passed. Calculation for standard deviation 95 of, i.e., infrastructure,
land occupation, transport services or other services can differ from
standard Pedigree approach used in this project and figures obtained by
this procedure.
