# treatment of sludge from pulp and paper production, sanitary landfill

Dataset: EcoSpold 2, unit process
Geography: Europe without Switzerland
Time period: 1994-01-01 to 2022-12-31
Technology level: current
Classification: ISIC rev.4 ecoinvent: 3821:Treatment and disposal of non-hazardous waste
Classification: EcoSpold01Categories: waste management/sanitary landfill
Synonyms: wastewater treatment sludge form pulp and paper production
Tags: Treatment
Scenario: Business-as-Usual
System model: Allocation at the point of substitution
Generated by: [System]
Database: ecoinvent
isCopyrightProtected: true

## General comment
Inventoried waste contains 100% sludge from pulp and paper production; .
waste composition (wet, in ppm): upper heating value 5.032 MJ/kg; lower heating value 2.645 MJ/kg; H2O 250000; O 427890; H 29257; C 157500; S 3367; N 26559; P 12074; B n.a.; Cl 0.025838; Br n.a.; F 1.9261; I n.a.; Ag n.a.; As 1.4625; Ba n.a.; Cd 0.255; Co 4.7786; Cr 12.75; Cu 84.585; Hg 0.18; Mn 156.56; Mo 2.8282; Ni 8.925; Pb 46.95; Sb n.a.; Se n.a.; Sn 11.862; V n.a.; Zn 131.5; Be n.a.; Sc n.a.; Sr n.a.; Ti n.a.; Tl n.a.; W n.a.; Si 17626; Fe 20951; Ca 29909; Al 5851.4; K 2344.6; Mg 3357.9; Na 12849;
Share of carbon in waste that is biogenic 100%.
Overall degradability of waste during 100 years: 60%.

## Included activities end
Waste-specific short-term emissions to air via landfill gas incineration and landfill leachate. Burdens from treatment of short-term leachate (0-100a) in wastewater treatment plant (including WWTP sludge disposal in municipal incinerator). Long-term emissions from landfill to groundwater (after base lining failure).

## Technology
Swiss municipal sanitary landfill for biogenic or untreated municipal waste ('reactive organic landfill'). Landfill gas and leachate collection system. Recultivation and monitoring for 150 years after closure.

## Reference product
- sludge from pulp and paper production: -1 kg; name RP; By-product classification Waste; CPC 39920: Sewage sludge
  production volume 1.75869e9 kg
    Estimated. The EU without CH production volume is extrapolated from the global production volume using the nominal GDP of 2010 (source: United Nations, http://data.un.org/Glossary.aspx?q=GDP+%28current+US%24%29, accessed 20130726 and 20130312).
    Gross domestic product (GDP) at current prices is GDP at prices of the current reporting period. Also known as nominal GDP.
  property carbon content, non-fossil 0.21
    Tab 6.21, ecoinvent v2.2 report 11_III & Tab A.9, ecoinvent v2.2 report 13_I. Sludge from pulp and paper contains 15.75% carbon
  property heating value, net 2.65 MJ
    Value taken from the general comment of the treatment dataset.
  property price 0 EUR2005
    Waste products are assigned a price of zero as they are assumed to require further treatment.
  properties: carbon allocation 0.1575 kg, carbon content 0.21, carbon content, fossil 0, dry mass 0.75 kg, water content 0.333333, water in wet mass 0.25 kg, wet mass 1 kg

## Inputs from technosphere
- aluminium sulfate, powder: 0.000519 kg; lognormal variance with pedigree 0.75, pedigree (5,5,5,5,5)
  burden from wastewater treatment of the short-term leachate (0-100a). Uncertainty calculated from unertainty of the waste composition of this waste, uncertainty in waste decomposition and short-term leaching in sanitary landfill
  properties: dry mass 1 kg, wet mass 1 kg
- ammonia, anhydrous, liquid: 3.74e-5 kg; lognormal variance with pedigree 0.292, pedigree (1,1,5,5,1)
  burden from incineration of sludge from wastewater treatment of the short-term leachate (0-100a). uncertainty is calculated from uncertainties in waste composition and transfer coefficients in incinerator and uncertainty of waste decomposition and short-term leaching in sanitary landfill
  properties: dry mass 1 kg, wet mass 1 kg
- cement, unspecified: 0.000216 kg; lognormal variance with pedigree 0.332, pedigree (1,1,5,5,1)
  (same comment as for ammonia, anhydrous, liquid)
  properties: dry mass 1 kg, wet mass 1 kg
- chemical, inorganic: 4.43e-8 kg; lognormal variance with pedigree 0.492, pedigree (1,1,5,5,1)
  (same comment as for ammonia, anhydrous, liquid)
  properties: carbon content, fossil 0.003, dry mass 1 kg, wet mass 1 kg
  note on carbon content, fossil: This dataset is an unweighted average of 20 inorganic substances (listed in Tab 88.1, ecoinvent v2.2 report 8, part II), being part of the top100 chemicals included in this database. The C-content has also been calculated as an unweighted average of the C content of the substances composing this dataset.
- chemical, organic: 5.7e-8 kg; lognormal variance with pedigree 1.512, pedigree (1,1,5,5,1)
  (same comment as for ammonia, anhydrous, liquid)
  properties: carbon content, fossil 0.628, dry mass 1 kg, heating value, net 19.03 MJ, wet mass 1 kg
  note on carbon content, fossil: This dataset is an unweighted average of 20 organic substances (listed in Tab 88.1, ecoinvent v2.2 report 8, part II), being part of the top100 chemicals included in this database. The C-content has also been calculated as an unweighted average of the C content of the substances composing this dataset.
- chromium oxide, flakes: 2.18e-8 kg; lognormal variance with pedigree 0.62, pedigree (5,5,5,5,5)
  burden from incineration of sludge from wastewater treatment of the short-term leachate (0-100a). Proxy for vanadium pentoxide V2O5 in SCR catalyst, uncertainty calculated from uncertainty in average DeNOx input, uncertainty in the share of thermal NOx, uncertainty of nitrogen content in average municipal waste and the unertainty in nitrogen content in *this* waste and uncertainty of waste decomposition and short-term leaching in sanitary landfill
  properties: dry mass 1 kg, wet mass 1 kg
- electricity, high voltage: 0.00179 kWh; lognormal variance with pedigree 0.402, pedigree (1,1,5,5,1)
  (same comment as for ammonia, anhydrous, liquid)
- electricity, low voltage: 0.128 kWh; lognormal variance with pedigree 0.3, pedigree (5,5,5,5,5)
  (same comment as for aluminium sulfate, powder)
- heat, central or small-scale, other than natural gas: 0.0046624 MJ; lognormal variance with pedigree 0.33, pedigree (5,5,5,5,5)
  (same comment as for aluminium sulfate, powder)
  properties: heating value, net 1 MJ
- heat, district or industrial, natural gas: 0.0096984 MJ; lognormal variance with pedigree 0.33, pedigree (5,5,5,5,5)
  (same comment as for aluminium sulfate, powder)
  properties: heating value, net 1 MJ
- heat, district or industrial, other than natural gas: 0.0104 MJ; lognormal variance with pedigree 0.212, pedigree (1,1,5,5,1)
  (same comment as for ammonia, anhydrous, liquid)
  properties: heating value, net 1 MJ
- hydrochloric acid, without water, in 30% solution state: 2.66e-8 kg; lognormal variance with pedigree 0.492, pedigree (1,1,5,5,1)
  (same comment as for ammonia, anhydrous, liquid)
  properties: dry mass 1 kg, heating value, net 3.32 MJ, wet mass 1 kg
- iron (III) chloride, without water, in 40% solution state: 0.00263 kg; lognormal variance with pedigree 0.632, pedigree (1,1,5,5,1)
  (same comment as for ammonia, anhydrous, liquid)
  properties: dry mass 1 kg, wet mass 1 kg
- iron sulfate: 0.00192 kg; lognormal variance with pedigree 0.75, pedigree (5,5,5,5,5)
  (same comment as for aluminium sulfate, powder)
  properties: dry mass 1 kg, wet mass 1 kg
- municipal waste incineration facility: 3.11e-12 unit; lognormal variance with pedigree 0.212, pedigree (1,1,5,5,1)
  Burden from incineration of sludge from wastewater treatment of the short-term leachate (0-100a).
- process-specific burdens, municipal waste incineration: 0.0124 kg; lognormal variance with pedigree 0.212, pedigree (1,1,5,5,1)
  Burden from incineration of sludge from wastewater treatment of the short-term leachate (0-100a).;activityLink introduced to establish a direct link to the corresponding regional supply of this product
- process-specific burdens, residual material landfill: 0.00054 kg; lognormal variance with pedigree 0.332, pedigree (1,1,5,5,1)
  burden from incineration of sludge from wastewater treatment of the short-term leachate (0-100a). uncertainty is calculated from uncertainties in waste composition and transfer coefficients in incinerator and uncertainty of waste decomposition and short-term leaching in sanitary landfill;activityLink introduced to establish a direct link to the corresponding regional supply of this product
- process-specific burdens, sanitary landfill: 1 kg; lognormal variance with pedigree 0.042, pedigree (1,1,5,5,1)
  demands per kilogram waste. uncertainty is heeded in the module
- process-specific burdens, slag landfill: 0.00459 kg; lognormal variance with pedigree 0.332, pedigree (1,1,5,5,1)
  (same comment as for process-specific burdens, residual material landfill)
- quicklime, milled, packed: 4.53e-7 kg; lognormal variance with pedigree 0.202, pedigree (1,1,5,5,1)
  (same comment as for ammonia, anhydrous, liquid)
  properties: dry mass 0.99 kg, water content 0.010101, wet mass 1 kg
- residual material landfill: 1.13e-12 unit; lognormal variance with pedigree 0.332, pedigree (1,1,5,5,1)
  (same comment as for ammonia, anhydrous, liquid)
- sanitary landfill facility: 5.56e-10 unit; lognormal variance with pedigree 0.042, pedigree (1,1,5,5,1)
  demands per kilogram waste. uncertainty is heeded in the module
- sewer grid, 5E9l/year, 110 km: 5.45e-10 km; lognormal variance with pedigree 0.2106, pedigree (5,5,5,5,5)
  (same comment as for aluminium sulfate, powder)
- slag landfill: 8.15e-12 unit; lognormal variance with pedigree 0.332, pedigree (1,1,5,5,1)
  (same comment as for ammonia, anhydrous, liquid)
- sodium hydroxide, without water, in 50% solution state: 2.5e-6 kg; lognormal variance with pedigree 0.202, pedigree (1,1,5,5,1)
  (same comment as for ammonia, anhydrous, liquid)
  properties: dry mass 1 kg, heating value, net 3.03 MJ, wet mass 1 kg
- titanium dioxide: 1.07e-6 kg; lognormal variance with pedigree 0.512, pedigree (1,1,5,5,1)
  (same comment as for ammonia, anhydrous, liquid)
  properties: dry mass 1 kg, wet mass 1 kg
- waste cement, hydrated: -0.00054 kg; name waste_cement; lognormal variance with pedigree 0.292, pedigree (1,1,1,5,1)
  (same comment as for ammonia, anhydrous, liquid)
  production volume
    Calculated from the production volume of sludge from pulp and paper production, 25% water in proportion to the respective output amounts.
  properties: dry mass 1 kg, wet mass 1 kg
- waste graphical paper: -3.88e-5 kg; name waste_graphicalp; lognormal variance with pedigree 0.2106, pedigree (5,5,5,5,5)
  (same comment as for aluminium sulfate, powder)
  production volume
    (same comment as for waste cement, hydrated)
  properties: carbon content, non-fossil 0.454955, dry mass 0.888 kg, heating value, net 14.12 MJ, water content 0.126126, wet mass 1 kg
  note on heating value, net: Value taken from the general comment of the treatment dataset.
- waste plastic, mixture: -3.88e-5 kg; name waste_plastic; lognormal variance with pedigree 0.2106, pedigree (5,5,5,5,5)
  (same comment as for aluminium sulfate, powder)
  production volume
    (same comment as for waste cement, hydrated)
  properties: carbon content, fossil 0.747344, dry mass 0.847 kg, heating value, net 30.79 MJ, water content 0.180638, wet mass 1 kg
  note on carbon content, fossil: C content in 1 kg DM was calculated using data in Tab A.2, ecoinvent v2.2 report 13_I
- wastewater treatment facility, capacity 5E9l/year: 1.42e-11 unit; lognormal variance with pedigree 0.2106, pedigree (5,5,5,5,5)
  (same comment as for aluminium sulfate, powder)

## Emissions to nature
- Aluminium III [air, non-urban air or from high stacks]: 4.39e-8 kg; lognormal variance with pedigree 1.772, pedigree (1,1,5,5,1)
  burden from direct release or incineration of landfill biogas. Uncertainty calculated from unertainty of the waste composition of this waste, uncertainty in waste decomposition and short-term leaching in sanitary landfill
- Aluminium III [air, urban air close to ground]: 3.86e-7 kg; lognormal variance with pedigree 0.492, pedigree (1,1,5,5,1)
  Emissions from short-term leachate treatment and incineration of resulting sludge. Uncertainty calculated depending on waste input and uncertainty of transfer coefficents in landfill, wastewater treatment and incineration model.
- Ammonia [air, urban air close to ground]: 2.37e-5 kg; lognormal variance with pedigree 0.222, pedigree (1,1,5,5,1)
  (same comment as for Aluminium III)
- Arsenic ion [air, non-urban air or from high stacks]: 2.21e-9 kg; lognormal variance with pedigree 2.162, pedigree (1,1,5,5,1)
  (same comment as for Aluminium III)
- Arsenic ion [air, urban air close to ground]: 4.44e-11 kg; lognormal variance with pedigree 1.712, pedigree (1,1,5,5,1)
  (same comment as for Aluminium III)
- Cadmium II [air, non-urban air or from high stacks]: 1.79e-10 kg; lognormal variance with pedigree 2.482, pedigree (1,1,5,5,1)
  (same comment as for Aluminium III)
- Cadmium II [air, urban air close to ground]: 7.36e-13 kg; lognormal variance with pedigree 1.962, pedigree (1,1,5,5,1)
  (same comment as for Aluminium III)
- Calcium [air, non-urban air or from high stacks]: 5.84e-7 kg; lognormal variance with pedigree 1.462, pedigree (1,1,5,5,1)
  (same comment as for Aluminium III)
- Calcium [air, urban air close to ground]: 3.82e-7 kg; lognormal variance with pedigree 0.462, pedigree (1,1,5,5,1)
  (same comment as for Aluminium III)
- Carbon dioxide, non-fossil [air, non-urban air or from high stacks]: 0.237 kg; lognormal variance with pedigree 0.132, pedigree (1,1,5,5,1)
  (same comment as for Aluminium III)
- Carbon dioxide, non-fossil [air, urban air close to ground]: 0.0079 kg; lognormal variance with pedigree 0.432, pedigree (1,1,5,5,1)
  (same comment as for Aluminium III)
- Carbon monoxide, non-fossil [air, non-urban air or from high stacks]: 1.34e-5 kg; lognormal variance with pedigree 0.782, pedigree (1,1,5,5,1)
  (same comment as for Aluminium III)
- Carbon monoxide, non-fossil [air, urban air close to ground]: 7.48e-6 kg; lognormal variance with pedigree 0.322, pedigree (1,1,5,5,1)
  (same comment as for Aluminium III)
- Chromium III [air, non-urban air or from high stacks]: 2.18e-11 kg; lognormal variance with pedigree 2.772, pedigree (1,1,5,5,1)
  (same comment as for Aluminium III)
- Chromium III [air, urban air close to ground]: 3.18e-15 kg; lognormal variance with pedigree 1.802, pedigree (1,1,5,5,1)
  (same comment as for Aluminium III)
- Cobalt II [air, non-urban air or from high stacks]: 2.3e-10 kg; lognormal variance with pedigree 2.462, pedigree (1,1,5,5,1)
  (same comment as for Aluminium III)
- Cobalt II [air, urban air close to ground]: 1.44e-14 kg; lognormal variance with pedigree 1.592, pedigree (1,1,5,5,1)
  (same comment as for Aluminium III)
- Copper ion [air, non-urban air or from high stacks]: 7.1e-11 kg; lognormal variance with pedigree 2.602, pedigree (1,1,5,5,1)
  (same comment as for Aluminium III)
- Copper ion [air, urban air close to ground]: 1.36e-12 kg; lognormal variance with pedigree 1.612, pedigree (1,1,5,5,1)
  (same comment as for Aluminium III)
- Cyanide [air, urban air close to ground]: 6.66e-7 kg; lognormal variance with pedigree 0.302, pedigree (1,1,5,5,1)
  (same comment as for Aluminium III)
- Dinitrogen monoxide [air, urban air close to ground]: 6.54e-5 kg; lognormal variance with pedigree 0.182, pedigree (1,1,5,5,1)
  (same comment as for Aluminium III)
- Hydrochloric acid [air, non-urban air or from high stacks]: 3.67e-10 kg; lognormal variance with pedigree 2.292, pedigree (1,1,5,5,1)
  (same comment as for Aluminium III)
- Hydrogen fluoride [air, non-urban air or from high stacks]: 4.61e-7 kg; lognormal variance with pedigree 1.582, pedigree (1,1,5,5,1)
  (same comment as for Aluminium III)
- Iron ion [air, non-urban air or from high stacks]: 4.32e-8 kg; lognormal variance with pedigree 1.792, pedigree (1,1,5,5,1)
  (same comment as for Aluminium III)
- Iron ion [air, urban air close to ground]: 5.66e-8 kg; lognormal variance with pedigree 0.622, pedigree (1,1,5,5,1)
  (same comment as for Aluminium III)
- Lead II [air, non-urban air or from high stacks]: 5.53e-11 kg; lognormal variance with pedigree 2.642, pedigree (1,1,5,5,1)
  (same comment as for Aluminium III)
- Lead II [air, urban air close to ground]: 5.49e-12 kg; lognormal variance with pedigree 1.652, pedigree (1,1,5,5,1)
  (same comment as for Aluminium III)
- Magnesium [air, non-urban air or from high stacks]: 3.11e-7 kg; lognormal variance with pedigree 1.512, pedigree (1,1,5,5,1)
  (same comment as for Aluminium III)
- Magnesium [air, urban air close to ground]: 1.68e-7 kg; lognormal variance with pedigree 0.602, pedigree (1,1,5,5,1)
  (same comment as for Aluminium III)
- Manganese II [air, non-urban air or from high stacks]: 2.69e-8 kg; lognormal variance with pedigree 1.832, pedigree (1,1,5,5,1)
  (same comment as for Aluminium III)
- Manganese II [air, urban air close to ground]: 2.88e-13 kg; lognormal variance with pedigree 1.092, pedigree (1,1,5,5,1)
  (same comment as for Aluminium III)
- Mercury II [air, non-urban air or from high stacks]: 2.96e-9 kg; lognormal variance with pedigree 2.142, pedigree (1,1,5,5,1)
  (same comment as for Aluminium III)
- Mercury II [air, urban air close to ground]: 1.25e-14 kg; lognormal variance with pedigree 2.092, pedigree (1,1,5,5,1)
  (same comment as for Aluminium III)
- Methane, non-fossil [air, non-urban air or from high stacks]: 0.0363 kg; lognormal variance with pedigree 0.182, pedigree (1,1,5,5,1)
  (same comment as for Aluminium III)
- Methane, non-fossil [air, urban air close to ground]: 1.55e-5 kg; lognormal variance with pedigree 0.472, pedigree (1,1,5,5,1)
  (same comment as for Aluminium III)
- Molybdenum VI [air, non-urban air or from high stacks]: 4.47e-11 kg; lognormal variance with pedigree 2.672, pedigree (1,1,5,5,1)
  (same comment as for Aluminium III)
- Molybdenum VI [air, urban air close to ground]: 1.76e-10 kg; lognormal variance with pedigree 1.672, pedigree (1,1,5,5,1)
  (same comment as for Aluminium III)
- NMVOC, non-methane volatile organic compounds [air, non-urban air or from high stacks]: 2.54e-7 kg; lognormal variance with pedigree 0.182, pedigree (1,1,5,5,1)
  (same comment as for Aluminium III)
- NMVOC, non-methane volatile organic compounds [air, urban air close to ground]: 7.03e-8 kg; lognormal variance with pedigree 0.592, pedigree (1,1,5,5,1)
  (same comment as for Aluminium III)
- Nickel II [air, non-urban air or from high stacks]: 7.78e-11 kg; lognormal variance with pedigree 2.602, pedigree (1,1,5,5,1)
  (same comment as for Aluminium III)
- Nickel II [air, urban air close to ground]: 5.29e-15 kg; lognormal variance with pedigree 1.662, pedigree (1,1,5,5,1)
  (same comment as for Aluminium III)
- Nitrogen oxides [air, non-urban air or from high stacks]: 6.85e-6 kg; lognormal variance with pedigree 0.502, pedigree (1,1,5,5,1)
  (same comment as for Aluminium III)
- Nitrogen oxides [air, urban air close to ground]: 0.000232 kg; lognormal variance with pedigree 0.212, pedigree (1,1,5,5,1)
  (same comment as for Aluminium III)
- Particulate Matter, < 2.5 um [air, non-urban air or from high stacks]: 4.5e-6 kg; lognormal variance with pedigree 0.442, pedigree (1,1,5,5,1)
  (same comment as for Aluminium III)
- Phosphorus [air, urban air close to ground]: 2.57e-7 kg; lognormal variance with pedigree 0.652, pedigree (1,1,5,5,1)
  (same comment as for Aluminium III)
- Potassium I [air, non-urban air or from high stacks]: 2.57e-7 kg; lognormal variance with pedigree 1.532, pedigree (1,1,5,5,1)
  (same comment as for Aluminium III)
- Silicon [air, non-urban air or from high stacks]: 1.32e-7 kg; lognormal variance with pedigree 1.632, pedigree (1,1,5,5,1)
  (same comment as for Aluminium III)
- Silicon [air, urban air close to ground]: 1.16e-6 kg; lognormal variance with pedigree 0.622, pedigree (1,1,5,5,1)
  (same comment as for Aluminium III)
- Sodium [air, non-urban air or from high stacks]: 3.21e-6 kg; lognormal variance with pedigree 1.212, pedigree (1,1,5,5,1)
  (same comment as for Aluminium III)
- Sulfur dioxide [air, non-urban air or from high stacks]: 0.000264 kg; lognormal variance with pedigree 0.752, pedigree (1,1,5,5,1)
  (same comment as for Aluminium III)
- Tin ion [air, non-urban air or from high stacks]: 1.05e-11 kg; lognormal variance with pedigree 2.862, pedigree (1,1,5,5,1)
  (same comment as for Aluminium III)
- Tin ion [air, urban air close to ground]: 3.24e-11 kg; lognormal variance with pedigree 1.822, pedigree (1,1,5,5,1)
  (same comment as for Aluminium III)
- Zinc II [air, non-urban air or from high stacks]: 8.31e-10 kg; lognormal variance with pedigree 2.282, pedigree (1,1,5,5,1)
  (same comment as for Aluminium III)
- Zinc II [air, urban air close to ground]: 4.22e-11 kg; lognormal variance with pedigree 1.282, pedigree (1,1,5,5,1)
  (same comment as for Aluminium III)
- Aluminium III [water, ground-, long-term]: 0.00586 kg; lognormal variance with pedigree 0.452, pedigree (1,1,5,5,1)
  Emissions from long-term leachate (>100a) directly from MSW landfill and indirectly via incineration of treatement sludge from leachate treatement. Uncertainty calculated depending on waste input and uncertainty of long-term transfer coefficents in landfill.
- Aluminium III [water, surface water]: 1.05e-5 kg; lognormal variance with pedigree 0.722, pedigree (1,1,5,5,1)
  (same comment as for Aluminium III)
- Ammonium [water, ground-, long-term]: 1.08e-11 kg; lognormal variance with pedigree 2.222, pedigree (1,1,5,5,1)
  (same comment as for Aluminium III)
- Ammonium [water, surface water]: 0.0129 kg; lognormal variance with pedigree 0.212, pedigree (1,1,5,5,1)
  (same comment as for Aluminium III)
- Arsenic ion [water, ground-, long-term]: 1.32e-6 kg; lognormal variance with pedigree 1.542, pedigree (1,1,5,5,1)
  (same comment as for Aluminium III)
- Arsenic ion [water, surface water]: 1.39e-7 kg; lognormal variance with pedigree 1.672, pedigree (1,1,5,5,1)
  (same comment as for Aluminium III)
- BOD5, Biological Oxygen Demand [water, ground-, long-term]: 0.00419 kg; lognormal variance with pedigree 0.772, pedigree (1,1,5,5,1)
  (same comment as for Aluminium III)
- BOD5, Biological Oxygen Demand [water, surface water]: 0.000546 kg; lognormal variance with pedigree 0.432, pedigree (1,1,5,5,1)
  (same comment as for Aluminium III)
- COD, Chemical Oxygen Demand [water, ground-, long-term]: 0.0177 kg; lognormal variance with pedigree 0.772, pedigree (1,1,5,5,1)
  (same comment as for Aluminium III)
- COD, Chemical Oxygen Demand [water, surface water]: 0.00174 kg; lognormal variance with pedigree 0.432, pedigree (1,1,5,5,1)
  (same comment as for Aluminium III)
- Cadmium II [water, ground-, long-term]: 2.28e-7 kg; lognormal variance with pedigree 1.862, pedigree (1,1,5,5,1)
  (same comment as for Aluminium III)
- Cadmium II [water, surface water]: 1.37e-8 kg; lognormal variance with pedigree 1.902, pedigree (1,1,5,5,1)
  (same comment as for Aluminium III)
- Calcium II [water, ground-, long-term]: 0.0278 kg; lognormal variance with pedigree 0.282, pedigree (1,1,5,5,1)
  (same comment as for Aluminium III)
- Calcium II [water, surface water]: 0.00211 kg; lognormal variance with pedigree 0.432, pedigree (1,1,5,5,1)
  (same comment as for Aluminium III)
- Chloride [water, ground-, long-term]: 2.58e-17 kg; lognormal variance with pedigree 3.892, pedigree (1,1,5,5,1)
  (same comment as for Aluminium III)
- Chloride [water, surface water]: 0.00172 kg; lognormal variance with pedigree 0.632, pedigree (1,1,5,5,1)
  Emissions from short-term leachate treatment. Uncertainty calculated depending on waste input and uncertainty of transfer coefficents in landfill and wastewater treatment.
- Chromium III [water, surface water]: 1.37e-10 kg; lognormal variance with pedigree 1.722, pedigree (1,1,5,5,1)
  (same comment as for Aluminium III)
- Chromium VI [water, ground-, long-term]: 6.19e-8 kg; lognormal variance with pedigree 8.572, pedigree (1,1,5,5,1)
  (same comment as for Aluminium III)
- Chromium VI [water, surface water]: 4.57e-8 kg; lognormal variance with pedigree 1.682, pedigree (1,1,5,5,1)
  (same comment as for Aluminium III)
- Cobalt II [water, ground-, long-term]: 4.25e-6 kg; lognormal variance with pedigree 1.272, pedigree (1,1,5,5,1)
  (same comment as for Aluminium III)
- Cobalt II [water, surface water]: 4.68e-7 kg; lognormal variance with pedigree 1.482, pedigree (1,1,5,5,1)
  (same comment as for Aluminium III)
- Copper ion [water, ground-, long-term]: 8.45e-5 kg; lognormal variance with pedigree 1.022, pedigree (1,1,5,5,1)
  (same comment as for Aluminium III)
- Copper ion [water, surface water]: 6.45e-8 kg; lognormal variance with pedigree 1.542, pedigree (1,1,5,5,1)
  (same comment as for Aluminium III)
- DOC, Dissolved Organic Carbon [water, ground-, long-term]: 0.0162 kg; lognormal variance with pedigree 0.772, pedigree (1,1,5,5,1)
  (same comment as for Aluminium III)
- DOC, Dissolved Organic Carbon [water, surface water]: 0.000422 kg; lognormal variance with pedigree 0.432, pedigree (1,1,5,5,1)
  (same comment as for Aluminium III)
- Fluoride [water, ground-, long-term]: 1.4e-6 kg; lognormal variance with pedigree 1.532, pedigree (1,1,5,5,1)
  (same comment as for Aluminium III)
- Fluoride [water, surface water]: 8.49e-8 kg; lognormal variance with pedigree 1.722, pedigree (1,1,5,5,1)
  (same comment as for Chloride)
- Hydrogen sulfide [water, ground-, long-term]: 0.000181 kg; lognormal variance with pedigree 0.552, pedigree (1,1,5,5,1)
  (same comment as for Aluminium III)
- Iron ion [water, ground-, long-term]: 0.00225 kg; lognormal variance with pedigree 1.592, pedigree (1,1,5,5,1)
  (same comment as for Aluminium III)
- Iron ion [water, surface water]: 8.82e-5 kg; lognormal variance with pedigree 0.712, pedigree (1,1,5,5,1)
  (same comment as for Aluminium III)
- Lead II [water, ground-, long-term]: 4.68e-5 kg; lognormal variance with pedigree 1.132, pedigree (1,1,5,5,1)
  (same comment as for Aluminium III)
- Lead II [water, surface water]: 1.82e-8 kg; lognormal variance with pedigree 1.602, pedigree (1,1,5,5,1)
  (same comment as for Aluminium III)
- Magnesium [water, ground-, long-term]: 0.00223 kg; lognormal variance with pedigree 0.512, pedigree (1,1,5,5,1)
  (same comment as for Aluminium III)
- Magnesium [water, surface water]: 0.00112 kg; lognormal variance with pedigree 0.572, pedigree (1,1,5,5,1)
  (same comment as for Aluminium III)
- Manganese II [water, ground-, long-term]: 9.35e-5 kg; lognormal variance with pedigree 0.662, pedigree (1,1,5,5,1)
  (same comment as for Aluminium III)
- Manganese II [water, surface water]: 5.46e-5 kg; lognormal variance with pedigree 0.952, pedigree (1,1,5,5,1)
  (same comment as for Aluminium III)
- Mercury II [water, ground-, long-term]: 1.7e-7 kg; lognormal variance with pedigree 1.822, pedigree (1,1,5,5,1)
  (same comment as for Aluminium III)
- Mercury II [water, surface water]: 2.34e-9 kg; lognormal variance with pedigree 2.042, pedigree (1,1,5,5,1)
  (same comment as for Aluminium III)
- Molybdenum VI [water, ground-, long-term]: 1.12e-6 kg; lognormal variance with pedigree 1.602, pedigree (1,1,5,5,1)
  (same comment as for Aluminium III)
- Molybdenum VI [water, surface water]: 1.06e-7 kg; lognormal variance with pedigree 1.632, pedigree (1,1,5,5,1)
  (same comment as for Aluminium III)
- Nickel II [water, ground-, long-term]: 8.73e-6 kg; lognormal variance with pedigree 1.302, pedigree (1,1,5,5,1)
  (same comment as for Aluminium III)
- Nickel II [water, surface water]: 1.89e-7 kg; lognormal variance with pedigree 1.542, pedigree (1,1,5,5,1)
  (same comment as for Aluminium III)
- Nitrate [water, ground-, long-term]: 2.66e-5 kg; lognormal variance with pedigree 0.522, pedigree (1,1,5,5,1)
  (same comment as for Aluminium III)
- Nitrate [water, surface water]: 0.0469 kg; lognormal variance with pedigree 0.182, pedigree (1,1,5,5,1)
  (same comment as for Aluminium III)
- Nitrite [water, ground-, long-term]: 5.89e-13 kg; lognormal variance with pedigree 2.222, pedigree (1,1,5,5,1)
  (same comment as for Aluminium III)
- Nitrite [water, surface water]: 0.00027 kg; lognormal variance with pedigree 0.302, pedigree (1,1,5,5,1)
  (same comment as for Aluminium III)
- Nitrogen [water, surface water]: 0.000349 kg; lognormal variance with pedigree 0.192, pedigree (1,1,5,5,1)
  (same comment as for Aluminium III)
- Nitrogen, organic bound [water, ground-, long-term]: 1.77e-11 kg; lognormal variance with pedigree 2.222, pedigree (1,1,5,5,1)
  (same comment as for Aluminium III)
- Phosphate [water, ground-, long-term]: 0.000272 kg; lognormal variance with pedigree 6.592, pedigree (1,1,5,5,1)
  (same comment as for Aluminium III)
- Phosphate [water, surface water]: 0.000437 kg; lognormal variance with pedigree 0.612, pedigree (1,1,5,5,1)
  (same comment as for Aluminium III)
- Potassium I [water, ground-, long-term]: 0.00132 kg; lognormal variance with pedigree 0.602, pedigree (1,1,5,5,1)
  (same comment as for Aluminium III)
- Potassium I [water, surface water]: 0.00103 kg; lognormal variance with pedigree 0.612, pedigree (1,1,5,5,1)
  (same comment as for Chloride)
- Silicon [water, ground-, long-term]: 0.00037 kg; lognormal variance with pedigree 4.032, pedigree (1,1,5,5,1)
  (same comment as for Aluminium III)
- Silicon [water, surface water]: 3.18e-5 kg; lognormal variance with pedigree 0.612, pedigree (1,1,5,5,1)
  (same comment as for Aluminium III)
- Sodium I [water, ground-, long-term]: 1.28e-11 kg; lognormal variance with pedigree 2.302, pedigree (1,1,5,5,1)
  (same comment as for Aluminium III)
- Sodium I [water, surface water]: 0.0128 kg; lognormal variance with pedigree 0.382, pedigree (1,1,5,5,1)
  (same comment as for Chloride)
- Sulfate [water, ground-, long-term]: 0.00694 kg; lognormal variance with pedigree 0.552, pedigree (1,1,5,5,1)
  (same comment as for Aluminium III)
- Sulfate [water, surface water]: 0.00395 kg; lognormal variance with pedigree 0.372, pedigree (1,1,5,5,1)
  (same comment as for Chloride)
- TOC, Total Organic Carbon [water, ground-, long-term]: 0.0162 kg; lognormal variance with pedigree 0.772, pedigree (1,1,5,5,1)
  (same comment as for Aluminium III)
- TOC, Total Organic Carbon [water, surface water]: 0.000439 kg; lognormal variance with pedigree 0.432, pedigree (1,1,5,5,1)
  (same comment as for Aluminium III)
- Tin ion [water, ground-, long-term]: 1.18e-5 kg; lognormal variance with pedigree 1.282, pedigree (1,1,5,5,1)
  (same comment as for Aluminium III)
- Tin ion [water, surface water]: 1.75e-8 kg; lognormal variance with pedigree 1.782, pedigree (1,1,5,5,1)
  (same comment as for Aluminium III)
- Zinc II [water, ground-, long-term]: 0.000106 kg; lognormal variance with pedigree 0.972, pedigree (1,1,5,5,1)
  (same comment as for Aluminium III)
- Zinc II [water, surface water]: 1.16e-6 kg; lognormal variance with pedigree 1.212, pedigree (1,1,5,5,1)
  (same comment as for Aluminium III)

## Sampling procedure
Landfill model based on observed leachate concentrations in literature. Extrapolated to 60'000 years heeding chemical characteristics. Initial waste composition from various literature sources.

## Extrapolations
This dataset has been copied from an original dataset covering the geography CH. The uncertainty has been adjusted accordingly.
