# treatment of sewage sludge, 97% water, WWT, WW from black chrome coating, landfarming

Dataset: EcoSpold 2, unit process
Geography: RoW
Time period: 2000-01-01 to 2022-12-31
Technology level: current
Classification: ISIC rev.4 ecoinvent: 3821:Treatment and disposal of non-hazardous waste
Scenario: Business-as-Usual
System model: Allocation at the point of substitution
Generated by: Nikolia Stoikou
Database: ecoinvent
isCopyrightProtected: true

## General comment
The process represents the treatment of a waste (sewage sludge) that is exclusively produced from another waste treatment. Recommended use of this dataset: to be used within the specific chain of treatments for 'wastewater from black chrome coating'. Share of biogenic carbon in the sludge: 0%.

## Included activities start
The activity starts with the waste being available for landfarming. Collection and transportation of the waste to this process is not included.

## Included activities end
The activity ends with the waste being treated and waste-specific emissions from the landfarming process are released to the environment (air, water and soil). The activity is considering local fate of emissions and the initial specific wastewater composition (generating the sewage sludge). Further, it includes provision of fertiliser functions for N, P, K, if present in the sludge.

## Geography
The site has mean annual temperature (MAT) of 16.743579766537 degC, mean annual precipitation (MAP) of 1250.84108527132 mm/year, mean annual actual evaporation (EAT) of 460.58904958214 mm/year. Climate will influence the local fate emissions based on the elemental composition of the sludge as well as water evaporation to air (= consumptive water use).
References: UN data, 2020. Precipitation, Environment Statistics Database, United Nations Statistics Division Available at: http://data.un.org/Data.aspx?q=precipitation&d=ENV&f=variableID%3a6;
World Bank, 2022. Surface area (sq.km), World Bank Group Available at: https://data.worldbank.org/indicator/AG.SRF.TOTL.K2;
Doka G.,2021. A model for composition-specific life cycle inventories of regionalised wastewater fates, Zurich, Switzerland. http://www.doka.ch/publications.htm

## Technology
Landfarming is the process of spreading a substrate on agricultural soil. Sewage sludge is generated in the wastewater treatment of wastewater from black chrome coating. Spreading of liquid sewage sludge (97w% water content) on agricultural fields with mobile vacuum tanker.

## Reference product
- organic nitrogen fertiliser, as N: 1 kg; By-product classification allocatable product; CPC 34659: Fertilizers n.e.c.; lognormal variance with pedigree 0.010695, pedigree (1,1,1,1,1)
  gross fertilizer function provided from sewage sludge spreading on agricultural fields.
  Uncertainty: Uncertainty calculated from upstream wastewater technosphere fate uncertainty, wastewater composition uncertainty, and treatment model uncertainty
  production volume 0.00576855 kg
    Calculated in proportion to wastewater reference product.
  property nitrogen content 1
    Nitrogen content (on a dry matter basis) of organic nitrogen fertiliser, as N is calculated from the molecular formula of the substance (Nitrogen).
  property price 0.473 EUR2005
    Set equal to the price of the corresponding inorganic fertiliser
  properties: carbon allocation 0 kg, carbon content 0, carbon content, fossil 0, carbon content, non-fossil 0, dry mass 1 kg, water content 0, water in wet mass 0 kg, wet mass 1 kg

## Inputs from technosphere
- boric acid, anhydrous, powder: 0.000143502 kg
- chemical, inorganic: 0.000522866 kg
- chromium oxide, flakes: 0.00741936 kg
- electricity, medium voltage: 0.144797, 0.41058, 0.0131588, 0.00431204, 0.0220018, 0.0343618, 1.32852, 0.0726682 kWh (8 suppliers, which the file names only by identifier); sum of these 2.0304 kWh
- fluosilicic acid, without water, in 22% solution state: 0.000238152 kg
- hazardous waste, for underground deposit: -0.152662 kg
- heat, district or industrial, natural gas: 3.91921, 0.0255656 MJ (2 suppliers, which the file names only by identifier); sum of these 3.94478 MJ
- metal coating facility: 2.54182e-7 unit
- nickel, class 1: 0.0154188 kg
- soap: 0.00155715 kg
- sulfuric acid: 0.00280134 kg
- tap water: 0.0420487, 0.504288, 0.0199987, 0.0373166, 5.77082, 0.0131189, 0.100528 kg (7 suppliers, which the file names only by identifier); sum of these 6.48812 kg
- wastewater from black chrome coating: -0.00648049 m3

## Emissions to nature
- Chromium III [air, urban air close to ground]: 1.14496e-6 kg
- Nickel II [air, urban air close to ground]: 2.28993e-7 kg
- Water [air, unspecified]: 0.000973219 m3
- Water [water, unspecified]: 0.000467257 m3
