# blast furnace sludge to market for blast furnace sludge, for recovery

Dataset: EcoSpold 2, unit process
Geography: RoW
Time period: 2020-01-01 to 2025-12-31
Technology level: current
Classification: ISIC rev.4 ecoinvent: 3821:Treatment and disposal of non-hazardous waste
Scenario: Business-as-Usual
System model: Allocation at the point of substitution
Generated by: Avraam Symeonidis
Database: ecoinvent
isCopyrightProtected: true

## General comment
This is a renaming activity. Its purpose is to link 'blast furnace sludge' to the 'market for blast furnace sludge, for recovery'. This represents the share of blast furnace sludge that is recovered for use via internal (in iron and steelmaking) or external routes (e.g. cement making).Through this renaming, the by-product classification of the blast furnace sludge is changed from 'waste' to 'recyclable material'.

## Included activities start
Activity starts with the reception of 'blast furnace sludge'.

## Included activities end
Activity ends with the 'blast furnace sludge, for recovery' being ready for transportation.

## Reference product
- blast furnace sludge, for recovery: 1 kg; name BP; By-product classification Recyclable; CPC 39310: Slag, dross, scalings and other waste from the manufacture of iron or steel
  production volume 5.7141e8 kg
    Calculated based on the production volume of the reference product.
  property aluminium content 0.0198529
    The value of 'aluminium content' is documented in Turner & Symeonidis, 2020. Reference: Turner David & Symeonidis Avraam, 2020, Life cycle inventories of the treatment of iron and steelmaking by-products, ecoinvent association, Zürich, Switzerland
  property antimony content 3.79412e-5
    The value of 'antimony content' is documented in Turner & Symeonidis, 2020. Reference: Turner David & Symeonidis Avraam, 2020, Life cycle inventories of the treatment of iron and steelmaking by-products, ecoinvent association, Zürich, Switzerland
  property arsenic content 8.45588e-5
    The value of 'arsenic content' is documented in Turner & Symeonidis, 2020. Reference: Turner David & Symeonidis Avraam, 2020, Life cycle inventories of the treatment of iron and steelmaking by-products, ecoinvent association, Zürich, Switzerland
  property barium content 0.000157353
    The value of 'barium content' is documented in Turner & Symeonidis, 2020. Reference: Turner David & Symeonidis Avraam, 2020, Life cycle inventories of the treatment of iron and steelmaking by-products, ecoinvent association, Zürich, Switzerland
  property calcium content 0.0641176
    The value of 'calcium content' is documented in Turner & Symeonidis, 2020. Reference: Turner David & Symeonidis Avraam, 2020, Life cycle inventories of the treatment of iron and steelmaking by-products, ecoinvent association, Zürich, Switzerland
  property carbon content, fossil 0.338235
    The value of 'carbon content, fossil' is documented in Turner & Symeonidis, 2020. Reference: Turner David & Symeonidis Avraam, 2020, Life cycle inventories of the treatment of iron and steelmaking by-products, ecoinvent association, Zürich, Switzerland
  property carbon content, non-fossil 0
    The value of 'carbon content, non-fossil' is documented in Turner & Symeonidis, 2020. Reference: Turner David & Symeonidis Avraam, 2020, Life cycle inventories of the treatment of iron and steelmaking by-products, ecoinvent association, Zürich, Switzerland
  property chlorine content 0.000698529
    The value of 'chlorine content' is documented in Turner & Symeonidis, 2020. Reference: Turner David & Symeonidis Avraam, 2020, Life cycle inventories of the treatment of iron and steelmaking by-products, ecoinvent association, Zürich, Switzerland
  property chromium content 6.64706e-5
    The value of 'chromium content' is documented in Turner & Symeonidis, 2020. Reference: Turner David & Symeonidis Avraam, 2020, Life cycle inventories of the treatment of iron and steelmaking by-products, ecoinvent association, Zürich, Switzerland
  property copper content 7.80882e-5
    The value of 'copper content' is documented in Turner & Symeonidis, 2020. Reference: Turner David & Symeonidis Avraam, 2020, Life cycle inventories of the treatment of iron and steelmaking by-products, ecoinvent association, Zürich, Switzerland
  property fluorine content 0.00225
    The value of 'fluorine content' is documented in Turner & Symeonidis, 2020. Reference: Turner David & Symeonidis Avraam, 2020, Life cycle inventories of the treatment of iron and steelmaking by-products, ecoinvent association, Zürich, Switzerland
  property heating value, net 5.48 MJ
    LHV is calculated based on the Carbon content of the product. More details can be found on the respective documentation.
  property iron content 0.4
    The value of 'iron content' is documented in Turner & Symeonidis, 2020. Reference: Turner David & Symeonidis Avraam, 2020, Life cycle inventories of the treatment of iron and steelmaking by-products, ecoinvent association, Zürich, Switzerland
  property lead content 0.00958824
    The value of 'lead content' is documented in Turner & Symeonidis, 2020. Reference: Turner David & Symeonidis Avraam, 2020, Life cycle inventories of the treatment of iron and steelmaking by-products, ecoinvent association, Zürich, Switzerland
  property magnesium content 0.0357353
    The value of 'magnesium content' is documented in Turner & Symeonidis, 2020. Reference: Turner David & Symeonidis Avraam, 2020, Life cycle inventories of the treatment of iron and steelmaking by-products, ecoinvent association, Zürich, Switzerland
  property manganese content 0.00357353
    The value of 'manganese content' is documented in Turner & Symeonidis, 2020. Reference: Turner David & Symeonidis Avraam, 2020, Life cycle inventories of the treatment of iron and steelmaking by-products, ecoinvent association, Zürich, Switzerland
  property molybdenum content 9e-6
    The value of 'molybdenum content' is documented in Turner & Symeonidis, 2020. Reference: Turner David & Symeonidis Avraam, 2020, Life cycle inventories of the treatment of iron and steelmaking by-products, ecoinvent association, Zürich, Switzerland
  property nickel content 0.000126029
    The value of 'nickel content' is documented in Turner & Symeonidis, 2020. Reference: Turner David & Symeonidis Avraam, 2020, Life cycle inventories of the treatment of iron and steelmaking by-products, ecoinvent association, Zürich, Switzerland
  property oxygen content 0.00839909
    The value of 'oxygen content' is documented in Turner & Symeonidis, 2020. Reference: Turner David & Symeonidis Avraam, 2020, Life cycle inventories of the treatment of iron and steelmaking by-products, ecoinvent association, Zürich, Switzerland
  property phosphorus content 0.00126029
    The value of 'phosphorus content' is documented in Turner & Symeonidis, 2020. Reference: Turner David & Symeonidis Avraam, 2020, Life cycle inventories of the treatment of iron and steelmaking by-products, ecoinvent association, Zürich, Switzerland
  property potassium content 0.00347059
    The value of 'potassium content' is documented in Turner & Symeonidis, 2020. Reference: Turner David & Symeonidis Avraam, 2020, Life cycle inventories of the treatment of iron and steelmaking by-products, ecoinvent association, Zürich, Switzerland
  property price 0.00758 EUR2005
    Value is calculated based on the iron content of this material in combination with the price for iron ore concentrate on a per kg iron basis.
  property scandium content 4e-6
    The value of 'scandium content' is documented in Turner & Symeonidis, 2020. Reference: Turner David & Symeonidis Avraam, 2020, Life cycle inventories of the treatment of iron and steelmaking by-products, ecoinvent association, Zürich, Switzerland
  property silicon content 0.0454412
    The value of 'silicon content' is documented in Turner & Symeonidis, 2020. Reference: Turner David & Symeonidis Avraam, 2020, Life cycle inventories of the treatment of iron and steelmaking by-products, ecoinvent association, Zürich, Switzerland
  property sodium content 0.00919118
    The value of 'sodium content' is documented in Turner & Symeonidis, 2020. Reference: Turner David & Symeonidis Avraam, 2020, Life cycle inventories of the treatment of iron and steelmaking by-products, ecoinvent association, Zürich, Switzerland
  property strontium content 9.95588e-5
    The value of 'strontium content' is documented in Turner & Symeonidis, 2020. Reference: Turner David & Symeonidis Avraam, 2020, Life cycle inventories of the treatment of iron and steelmaking by-products, ecoinvent association, Zürich, Switzerland
  property sulfur content 0.0158824
    The value of 'sulfur content' is documented in Turner & Symeonidis, 2020. Reference: Turner David & Symeonidis Avraam, 2020, Life cycle inventories of the treatment of iron and steelmaking by-products, ecoinvent association, Zürich, Switzerland
  property tin content 8.5e-6
    The value of 'tin content' is documented in Turner & Symeonidis, 2020. Reference: Turner David & Symeonidis Avraam, 2020, Life cycle inventories of the treatment of iron and steelmaking by-products, ecoinvent association, Zürich, Switzerland
  property titanium content 0.00185294
    The value of 'titanium content' is documented in Turner & Symeonidis, 2020. Reference: Turner David & Symeonidis Avraam, 2020, Life cycle inventories of the treatment of iron and steelmaking by-products, ecoinvent association, Zürich, Switzerland
  property vanadium content 0.00213235
    The value of 'vanadium content' is documented in Turner & Symeonidis, 2020. Reference: Turner David & Symeonidis Avraam, 2020, Life cycle inventories of the treatment of iron and steelmaking by-products, ecoinvent association, Zürich, Switzerland
  property zinc content 0.0376471
    The value of 'zinc content' is documented in Turner & Symeonidis, 2020. Reference: Turner David & Symeonidis Avraam, 2020, Life cycle inventories of the treatment of iron and steelmaking by-products, ecoinvent association, Zürich, Switzerland
  properties: carbon allocation 0.23 kg, carbon content 0.338235, dry mass 0.68 kg, water content 0.470588, water in wet mass 0.32 kg, wet mass 1 kg

## Inputs from technosphere
- 2-nitroaniline: 2.71313e-6 kg
- acetic acid, without water, in 98% solution state: 1.10228e-9 kg
- acrylic acid: 3.88388e-11, 1.84372e-10 kg (2 suppliers, which the file names only by identifier); sum of these 2.23211e-10 kg
- activated silica: 7.16336e-9 kg
- aluminium oxide factory: 1.68305e-13 unit
- aluminium scrap, new: -4.43082e-11, -4.43082e-11 kg (2 suppliers, which the file names only by identifier); sum of these -8.86164e-11 kg
- aluminium scrap, post-consumer: -1.3686e-11 kg
- aluminium sulfate, powder: 9.92005e-11, 2.0897e-11 kg (2 suppliers, which the file names only by identifier); sum of these 1.20097e-10 kg
- aluminium, cast alloy: 3.22654e-10 kg
- aluminium, wrought alloy: 3.11163e-9 kg
- ammonia, anhydrous, liquid: 3.46962e-8, 3.63654e-9, 7.67869e-8, 3.28034e-8, 1.33649e-7, 1.78735e-8, 1.62567e-8, 3.84585e-7, 1.14888e-8 kg (9 suppliers, which the file names only by identifier); sum of these 7.11776e-7 kg
- ammonium chloride: 1.92742e-9 kg
- ammonium nitrate: 3.16571e-8, 4.56458e-8, 2.43319e-8, 8.25997e-8 kg (4 suppliers, which the file names only by identifier); sum of these 1.84234e-7 kg
- anode, for metal electrolysis: 4.60584e-7 kg
- antimony: 9.10334e-12 kg
- barium carbonate: 2.34403e-10 kg
- basic oxygen furnace dust, for recovery: 5.77515e-5 kg
- basic oxygen furnace secondary metallurgy slag, for recovery: 3.22304e-7 kg
- basic oxygen furnace slag, for recovery: 8.09502e-5 kg
- basic oxygen furnace sludge, for recovery: 9.04068e-7 kg
- bentonite: 1.89451e-9 kg
- benzaldehyde: 1.01675e-8, 5.02132e-9 kg (2 suppliers, which the file names only by identifier); sum of these 1.51888e-8 kg
- blast furnace: 4.87322e-14 unit
- blast furnace dust: -4.20729e-5 kg
- blast furnace dust, for recovery: 3.94075e-5 kg
- blast furnace slag: -0.00100513 kg
- blast furnace sludge: -9.45857e-6, -1.40475e-6, -0.000303407, -1.59829e-7 kg (4 suppliers, which the file names only by identifier); sum of these -0.000314431 kg
- blast furnace sludge, for recovery: 2.85093e-5 kg
- butane: 7.32793e-11 kg
- calcium chloride: 1.96187e-10, 6.79462e-10 kg (2 suppliers, which the file names only by identifier); sum of these 8.75649e-10 kg
- carbon dioxide, liquid: 1.05306e-6, 2.21673e-7 kg (2 suppliers, which the file names only by identifier); sum of these 1.27474e-6 kg
- carbon disulfide: 9.99112e-9 kg
- cement, unspecified: 8.20339e-9, 3.07786e-11, 2.01322e-11, 1.15706e-11, 8.14593e-10, 2.14493e-10, 2.55692e-11, 1.30713e-10, 4.93518e-10 kg (9 suppliers, which the file names only by identifier); sum of these 9.94476e-9 kg
- charcoal: 2.01292e-10 kg
- chemical factory, organics: 1.46318e-14 unit
- chemical, inorganic: 7.08297e-10 kg
- chemical, organic: 1.20436e-7 kg
- chlorine, gaseous: 1.32916e-8, 2.69862e-9 kg (2 suppliers, which the file names only by identifier); sum of these 1.59902e-8 kg
- chlorine, liquid: 1.49925e-8, 2.99905e-9 kg (2 suppliers, which the file names only by identifier); sum of these 1.79915e-8 kg
- clinker: 6.45341e-10, 1.4969e-10, 9.18679e-9, 2.86334e-9, 3.06377e-9, 4.67176e-11, 1.91896e-10, 1.1485e-10 kg (8 suppliers, which the file names only by identifier); sum of these 1.62624e-8 kg
- coal gas: -0.0871908 MJ
- coal tar: -0.00063701 kg
- coke: 1.36448e-6, 0.0441356 MJ (2 suppliers, which the file names only by identifier); sum of these 0.044137 MJ
- compressed air, 800 kPa gauge: 1.61675e-5, 1.38112e-6 m3 (2 suppliers, which the file names only by identifier); sum of these 1.75487e-5 m3
- copper cake: -1.21736e-6 kg
- copper concentrate, sulfide ore: 0.00186375 kg
- copper scrap, sorted, pressed: -2.73944e-11 kg
- copper slag: -0.000824044 kg
- copper sulfate: 2.00428e-10 kg
- copper, cathode: 3.12194e-11 kg
- diesel: 1.02392e-6, 9.29732e-10 kg (2 suppliers, which the file names only by identifier); sum of these 1.02485e-6 kg
- diesel, burned in building machine: 2.22426e-5 MJ
- diesel, burned in diesel-electric generating set, 10MW: 3.90804e-6 MJ
- electric arc furnace secondary metallurgy slag, for recovery: 8.09779e-6 kg
- electric arc furnace slag, for recovery: 1.00955e-5 kg
- electricity, high voltage: 5.54235e-7, 3.95312e-5, 6.72274e-8, 2.3125e-6, 1.60842e-7, 4.00158e-7, 7.35062e-6, 1.60547e-6, 1.17338e-7, 2.01254e-6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 kWh (69 suppliers, which the file names only by identifier); sum of these 0.000409727 kWh
- electricity, medium voltage: 4.35612e-7, 5.88187e-7, 1.9064e-6, 8.45924e-7, 1.7658e-7, 5.36547e-6, 5.18095e-8, 1.03792e-5, 5.12897e-7, 1.42882e-7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 kWh (93 suppliers, which the file names only by identifier); sum of these 0.00121535 kWh
- electricity, medium voltage, cobalt industry: 0.000778179 kWh
- esterquat: 8.51683e-13, 1.69541e-12 kg (2 suppliers, which the file names only by identifier); sum of these 2.54709e-12 kg
- ethanol, without water, in 99.7% solution state, from ethylene: 1.93945e-9, 4.31855e-9 kg (2 suppliers, which the file names only by identifier); sum of these 6.258e-9 kg
- ethoxylated alcohol (AE11): 1.38186e-11 kg
- ethylene glycol: 1.08344e-10 kg
- explosive, tovex: 4.29257e-8 kg
- ferrite: 1.5823e-9 kg
- hard coal: 0.00287061, 0.00389876, 0.00176783, 1.07368e-8, 0.0125114, 0.00180403, 0.00134471, 0.00263563, 0.000767183, 0.000419493 kg (10 suppliers, which the file names only by identifier); sum of these 0.0280196 kg
- hard coal coke factory: 3.38412e-13 unit
- hazardous waste, for incineration: -5.09406e-9, -2.44972e-9, -6.40341e-11 kg (3 suppliers, which the file names only by identifier); sum of these -7.60781e-9 kg
- hazardous waste, for underground deposit: -2.30843e-8, -1.48692e-9 kg (2 suppliers, which the file names only by identifier); sum of these -2.45712e-8 kg
- heat, district or industrial, natural gas: 2.4693e-7, 0.000194623, 1.12111e-5, 0.000330757, 1.6439e-6, 3.09152e-8 MJ (6 suppliers, which the file names only by identifier); sum of these 0.000538513 MJ
- heat, district or industrial, other than natural gas: 0.00204518, 4.64512e-10, 5.39796e-6, 1.58249e-8, 6.74781e-8, 3.07007e-7, 9.04299e-5 MJ (7 suppliers, which the file names only by identifier); sum of these 0.00214139 MJ
- heat, from steam, in chemical industry: 1.94417e-6, 1.10269e-5 MJ (2 suppliers, which the file names only by identifier); sum of these 1.2971e-5 MJ
- heavy fuel oil: 1.23941e-6, 1.04291e-8, 5.30194e-8, 6.87479e-8, 1.3379e-8, 1.79097e-8, 2.55346e-7 kg (7 suppliers, which the file names only by identifier); sum of these 1.65824e-6 kg
- hydrochloric acid, without water, in 30% solution state: 8.16544e-8, 3.65637e-7 kg (2 suppliers, which the file names only by identifier); sum of these 4.47291e-7 kg
- hydrogen peroxide, without water, in 50% solution state: 1.75508e-8, 3.69713e-9 kg (2 suppliers, which the file names only by identifier); sum of these 2.12479e-8 kg
- hydrogen sulfide: 3.56852e-7, 7.51721e-8 kg (2 suppliers, which the file names only by identifier); sum of these 4.32024e-7 kg
- hydrogen, liquid: 1.54121e-8, 7.05293e-8 kg (2 suppliers, which the file names only by identifier); sum of these 8.59413e-8 kg
- inert waste: -5.25643e-5, -4.5272e-7, -0.000185283 kg (3 suppliers, which the file names only by identifier); sum of these -0.0002383 kg
- inert waste, for final disposal: -4.86267e-6 kg
- iron ore concentrate: 0.00647932 kg
- iron pellet: 0.001462 kg
- iron scrap, sorted, pressed: 5.1114e-6, 1.25892e-6 kg (2 suppliers, which the file names only by identifier); sum of these 6.37033e-6 kg
- iron sinter: 0.00383775 kg
- iron sulfate: 1.45409e-6, 4.50949e-10 kg (2 suppliers, which the file names only by identifier); sum of these 1.45454e-6 kg
- iron(III) chloride, without water, in 14% iron solution state: 1.37508e-10 kg
- iron(III) sulfate, without water, in 12.5% iron solution state: 5.72986e-10 kg
- isobutanol: 3.81226e-10, 9.18685e-10 kg (2 suppliers, which the file names only by identifier); sum of these 1.29991e-9 kg
- kerosene: 4.62018e-11, 7.81511e-9, 2.76841e-10, 1.59938e-9, 8.78296e-10, 5.86634e-11, 1.13692e-10, 7.52495e-11 kg (8 suppliers, which the file names only by identifier); sum of these 1.08634e-8 kg
- leach residue from copper production: -4.28494e-6 kg
- lead: 7.82795e-10 kg
- lead concentrate: 4.09097e-8 kg
- light fuel oil: 2.973e-8, 2.39886e-9, 2.95094e-9, 2.83737e-10, 6.3829e-9, 2.10864e-10, 1.95821e-10, 1.46214e-9 kg (8 suppliers, which the file names only by identifier); sum of these 4.36153e-8 kg
- lime, hydrated, loose weight: 2.01262e-9, 0.000177967 kg (2 suppliers, which the file names only by identifier); sum of these 0.000177969 kg
- lime, hydrated, packed: 6.98318e-9, 5.92755e-11 kg (2 suppliers, which the file names only by identifier); sum of these 7.04245e-9 kg
- lime, packed: 4.481e-7, 1.67195e-6, 0.000119239 kg (3 suppliers, which the file names only by identifier); sum of these 0.000121359 kg
- limestone, crushed, for mill: 2.81451e-7, 1.12845e-9, 2.40947e-9 kg (3 suppliers, which the file names only by identifier); sum of these 2.84989e-7 kg
- limestone, crushed, washed: 6.39401e-6, 5.4519e-8 kg (2 suppliers, which the file names only by identifier); sum of these 6.44852e-6 kg
- limestone, unprocessed: 2.19395e-9, 2.27128e-11, 0.000919198 kg (3 suppliers, which the file names only by identifier); sum of these 0.0009192 kg
- liquefied petroleum gas: 4.58727e-10 kg
- lubricating oil: 4.18168e-9, 8.80887e-10 kg (2 suppliers, which the file names only by identifier); sum of these 5.06257e-9 kg
- magnesium: 1.40319e-11 kg
- magnesium oxide: 2.16232e-7 kg
- manganese dioxide: 2.81108e-9 kg
- manganese sulfate: 1.02958e-9 kg
- meat and bone meal: 6.70825e-12, 1.13104e-14 kg (2 suppliers, which the file names only by identifier); sum of these 6.71956e-12 kg
- municipal solid waste: -2.93399e-7, -6.5112e-8, -2.30631e-10, -1.4136e-12, -2.77642e-9, -9.89183e-13 kg (6 suppliers, which the file names only by identifier); sum of these -3.6152e-7 kg
- naphtha: 2.21093e-8, 1.04227e-6, 1.69045e-7, 4.58511e-8, 1.76527e-9, 7.28515e-9, 2.32686e-7 kg (7 suppliers, which the file names only by identifier); sum of these 1.52102e-6 kg
- natural gas, high pressure: 1.83013e-7, 7.72503e-8, 4.42433e-7, 1.31297e-7, 7.4276e-6, 7.59159e-7, 8.25398e-10, 8.28685e-8, 2.44533e-9, 2.94253e-7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 m3 (29 suppliers, which the file names only by identifier); sum of these 2.22822e-5 m3
- natural gas, low pressure: 1.53434e-7, 5.50986e-8, 4.60431e-8, 1.19508e-7, 1.13131e-7, 2.35083e-6, 1.15682e-7, 1.00504e-7, 2.21925e-8, 1.07978e-6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 m3 (14 suppliers, which the file names only by identifier); sum of these 4.35313e-6 m3
- nickel smelter slag: -2.90256e-5 kg
- nitric acid, without water, in 50% solution state: 5.18411e-11, 6.74413e-10, 7.70278e-11, 1.91554e-10, 2.4911e-10, 9.17825e-11, 3.15673e-10, 8.32217e-11, 7.67427e-11, 5.84845e-10 kg (10 suppliers, which the file names only by identifier); sum of these 2.39621e-9 kg
- nitrogen, liquid: 1.22172e-8, 1.8706e-7, 5.13466e-8 kg (3 suppliers, which the file names only by identifier); sum of these 2.50623e-7 kg
- non-ferrous metal smelter: 5.33025e-15 unit
- non-sulfidic overburden, off-site: -0.000177927 kg
- oxygen, liquid: 2.62925e-6, 0.000190808 kg (2 suppliers, which the file names only by identifier); sum of these 0.000193437 kg
- paraffin: 1.23167e-11 kg
- perlite: 2.00796e-8 kg
- petrol, unleaded: 1.19312e-12, 1.37382e-10, 4.46344e-12, 5.20933e-11, 4.94696e-12, 1.19701e-12, 2.45773e-13 kg (7 suppliers, which the file names only by identifier); sum of these 2.01522e-10 kg
- petroleum coke: 6.90585e-7 kg
- phosphoric acid, fertiliser grade, without water, in 70% solution state: 2.90636e-6 kg
- phosphoric acid, industrial grade, without water, in 85% solution state: 6.682e-10 kg
- pig iron: 1.634e-10, 1.76415e-9 kg (2 suppliers, which the file names only by identifier); sum of these 1.92755e-9 kg
- polyacrylamide: 9.07647e-9 kg
- potassium hydroxide: 8.67041e-9 kg
- potassium permanganate: 3.1264e-11 kg
- process-specific burdens, inert material landfill: 9.92687e-7, 8.42625e-9 kg (2 suppliers, which the file names only by identifier); sum of these 1.00111e-6 kg
- propane: 1.22716e-6 kg
- quicklime, in pieces, loose: 6.8683e-5, 2.39813e-13 kg (2 suppliers, which the file names only by identifier); sum of these 6.8683e-5 kg
- quicklime, milled, loose: 7.93021e-9, 9.48914e-7 kg (2 suppliers, which the file names only by identifier); sum of these 9.56845e-7 kg
- refinery sludge: -2.01946e-8, -1.94686e-7, -9.24038e-10 kg (3 suppliers, which the file names only by identifier); sum of these -2.15805e-7 kg
- refractory, fireclay, packed: 7.31001e-6 kg
- silica sand: 0.000433768 kg
- silicone factory: 4.67884e-17 unit
- silver: 1.95715e-12 kg
- soda ash, dense: 8.54598e-9 kg
- soda ash, light: 2.11813e-7 kg
- sodium chloride, powder: 5.26478e-10 kg
- sodium dichromate: 2.29194e-11 kg
- sodium hydrogen sulfite: 2.01899e-12 kg
- sodium hydrosulfide: 2.34093e-9 kg
- sodium hydroxide, without water, in 50% solution state: 4.16443e-5 kg
- sodium hypochlorite, without water, in 15% solution state: 7.60793e-12, 3.61158e-11 kg (2 suppliers, which the file names only by identifier); sum of these 4.37237e-11 kg
- sodium percarbonate, powder: 1.08882e-7, 2.20472e-7 kg (2 suppliers, which the file names only by identifier); sum of these 3.29354e-7 kg
- sodium persulfate: 1.6359e-8 kg
- sodium phosphate: 2.12529e-14, 4.47701e-15 kg (2 suppliers, which the file names only by identifier); sum of these 2.57299e-14 kg
- sodium silicate, without water, in 37% solution state: 2.55547e-11, 1.26204e-11 kg (2 suppliers, which the file names only by identifier); sum of these 3.81751e-11 kg
- sodium sulfate, anhydrite: 2.99655e-8, 4.89442e-9 kg (2 suppliers, which the file names only by identifier); sum of these 3.48599e-8 kg
- sodium sulfide: 6.64458e-11 kg
- sodium tetrahydridoborate: 1.47625e-12 kg
- spent antifreezer liquid: -2.33944e-7 kg
- spent solvent mixture: -1.74767e-13, -1.59987e-15, -6.82874e-14 kg (3 suppliers, which the file names only by identifier); sum of these -2.44654e-13 kg
- steam, in chemical industry: 3.13797e-12, 1.77978e-11 kg (2 suppliers, which the file names only by identifier); sum of these 2.09358e-11 kg
- steel, low-alloyed: 2.85739e-7 kg
- strontium carbonate: 8.26886e-10 kg
- sulfamic acid: 5.20895e-13 kg
- sulfidic tailings, from zinc-lead mine operation: -2.22054e-10, -3.98835e-11, -3.126e-11, -7.52396e-11, -1.13398e-11, -2.73795e-11, -1.27713e-10, -5.79927e-11 kg (8 suppliers, which the file names only by identifier); sum of these -5.92863e-10 kg
- sulfidic tailings, generic: -4.75236e-5 kg
- sulfite pulp, bleached: 1.06337e-9 kg
- sulfur: 4.88275e-8 kg
- sulfur dioxide, liquid: 3.00785e-8, 7.48706e-8 kg (2 suppliers, which the file names only by identifier); sum of these 1.04949e-7 kg
- sulfuric acid: 3.49954e-5, 4.57813e-6 kg (2 suppliers, which the file names only by identifier); sum of these 3.95736e-5 kg
- tap water: 0.000199365, 2.26734e-7, 8.99164e-9, 1.93747e-6, 1.67779e-8, 2.59463e-6, 5.89842e-9, 4.51985e-8 kg (8 suppliers, which the file names only by identifier); sum of these 0.0002042 kg
- transport, freight train: 1.3074e-5, 1.54272e-8 metric ton*km (2 suppliers, which the file names only by identifier); sum of these 1.30894e-5 metric ton*km
- transport, freight, inland waterways, barge: 2.05554e-8, 4.19544e-7 metric ton*km (2 suppliers, which the file names only by identifier); sum of these 4.401e-7 metric ton*km
- transport, freight, lorry 16-32 metric ton, EURO3: 1.09005e-8, 4.50571e-8, 1.01066e-7 metric ton*km (3 suppliers, which the file names only by identifier); sum of these 1.57024e-7 metric ton*km
- transport, freight, lorry 16-32 metric ton, EURO4: 2.89437e-6, 3.3785e-7 metric ton*km (2 suppliers, which the file names only by identifier); sum of these 3.23222e-6 metric ton*km
- transport, freight, lorry 3.5-7.5 metric ton, EURO3: 8.8364e-13 metric ton*km
- transport, freight, lorry >32 metric ton, EURO3: 5.69191e-9 metric ton*km
- transport, freight, lorry >32 metric ton, EURO4: 1.94691e-5, 2.26824e-6 metric ton*km (2 suppliers, which the file names only by identifier); sum of these 2.17374e-5 metric ton*km
- transport, freight, lorry, unspecified: 5.01506e-11 metric ton*km
- transport, freight, sea, bulk carrier for dry goods: 5.33565e-5 metric ton*km
- transport, freight, sea, container ship: 7.02315e-8 metric ton*km
- urea: 3.43005e-12, 2.18777e-11, 1.8682e-11 kg (3 suppliers, which the file names only by identifier); sum of these 4.39897e-11 kg
- waste glass: -1.37361e-11, -1.07022e-13, -2.56354e-13, -2.78138e-12, -2.39174e-14, -5.28331e-12, -3.632e-14, -2.62121e-11, -5.8158e-15 kg (9 suppliers, which the file names only by identifier); sum of these -4.84424e-11 kg
- waste gypsum: -1.77388e-11, -3.75258e-10, -1.22178e-9 kg (3 suppliers, which the file names only by identifier); sum of these -1.61478e-9 kg
- waste mineral oil: -6.64898e-11, -7.03237e-9, -2.6858e-9 kg (3 suppliers, which the file names only by identifier); sum of these -9.78466e-9 kg
- waste paper, unsorted: -5.25385e-12, -5.25385e-12, -5.25385e-12 kg (3 suppliers, which the file names only by identifier); sum of these -1.57616e-11 kg
- waste paperboard: -1.01945e-13, -6.64903e-14, -1.24017e-11, -6.67598e-13, -1.63953e-12, -3.59193e-14, -3.68371e-13, -8.91419e-15 kg (8 suppliers, which the file names only by identifier); sum of these -1.52905e-11 kg
- waste plastic, mixture: -2.21169e-11 kg
- waste polyethylene terephthalate: -8.72413e-14, -1.12228e-15, -2.77799e-15, -1.00661e-13, -5.08661e-16, -2.63796e-15, -7.04684e-13, -6.72579e-15 kg (8 suppliers, which the file names only by identifier); sum of these -9.06359e-13 kg
- waste textile, soiled: -7.15678e-9, -1.07119e-10 kg (2 suppliers, which the file names only by identifier); sum of these -7.2639e-9 kg
- waste wood, untreated: -3.80793e-13, -3.49393e-12, -5.20841e-12, -5.56515e-10, -2.21007e-12, -6.62005e-11, -1.46288e-11, -4.19474e-11 kg (8 suppliers, which the file names only by identifier); sum of these -6.90585e-10 kg
- waste, from silicon wafer production, inorganic: -1.40365e-7 kg
- wastewater from pig iron production: -7.30229e-7 m3
- wastewater, average: -1.12611e-8, -6.6715e-9, -1.8739e-6, -4.48088e-7 m3 (4 suppliers, which the file names only by identifier); sum of these -2.33992e-6 m3
- wastewater, unpolluted: -3.34243e-9, -2.60591e-6 m3 (2 suppliers, which the file names only by identifier); sum of these -2.60926e-6 m3
- water, decarbonised: 0.0109681, 0.00146153, 0.000290187, 9.14009e-7, 9.6457e-6, 7.17519e-5, 0.00095419, 0.00931046, 0.0058947, 0.00174854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 kg (13 suppliers, which the file names only by identifier); sum of these 0.032075 kg
- water, deionised: 2.16947e-7, 6.02672e-5, 0.000195646 kg (3 suppliers, which the file names only by identifier); sum of these 0.000256131 kg
- water, harvested from rainwater: 7.9137e-7 kg
- zinc: 5.6861e-9 kg
- zinc concentrate: 3.65125e-6 kg
- zinc oxide: 9.37516e-8 kg
- zinc slag: -4.57779e-7 kg

## Inputs from nature
- Aluminium [natural resource, in ground]: 2.83545e-6 kg
- Arsenic [natural resource, in ground]: 6.9342e-9 kg
- Calcium [natural resource, in ground]: 4.36855e-7 kg
- Chromium [natural resource, in ground]: 9.60067e-7 kg
- Cobalt [natural resource, in ground]: 3.21642e-7 kg
- Copper [natural resource, in ground]: 6.79189e-6 kg
- Gangue [natural resource, in ground]: 0.000141762 kg
- Gold [natural resource, in ground]: 2.08038e-13 kg
- Iron [natural resource, in ground]: 9.56306e-5 kg
- Lead [natural resource, in ground]: 6.9342e-9 kg
- Magnesium [natural resource, in ground]: 4.47386e-6 kg
- Manganese [natural resource, in ground]: 5.18172e-7 kg
- Nickel [natural resource, in ground]: 3.68709e-6 kg
- Oxygen [natural resource, in air]: 0.00118828 kg
- Silicon [natural resource, in ground]: 1.74547e-5 kg
- Silver [natural resource, in ground]: 3.74468e-12 kg
- Sulfur [natural resource, in ground]: 5.0127e-5 kg
- Water, cooling, unspecified natural origin [natural resource, in water]: 3.96382e-6 m3
- Water, lake [natural resource, in water]: 6.13475e-8 m3
- Water, river [natural resource, in water]: 2.98576e-6 m3
- Water, salt, ocean [natural resource, in water]: 5.96124e-10 m3
- Water, unspecified natural origin [natural resource, in water]: 2.83111e-6 m3
- Water, well, in ground [natural resource, in water]: 2.39319e-8 m3
- Zinc [natural resource, in ground]: 1.38684e-8 kg

## Emissions to nature
- Acetic acid [air, unspecified]: 7.78321e-14 kg
- Acetone [air, non-urban air or from high stacks]: 8.42048e-7 kg
- Acrolein [air, non-urban air or from high stacks]: 1.03912e-9 kg
- Ammonia [air, non-urban air or from high stacks]: 1.22027e-7 kg
- Ammonia [air, unspecified]: 2.33467e-10 kg
- Antimony ion [air, non-urban air or from high stacks]: 5.53515e-8 kg
- Antimony ion [air, unspecified]: 1.5729e-13 kg
- Arsenic ion [air, non-urban air or from high stacks]: 4.42575e-7 kg
- Arsenic ion [air, unspecified]: 1.38616e-10 kg
- Barium II [air, non-urban air or from high stacks]: 4.45907e-10 kg
- Benzene [air, non-urban air or from high stacks]: 2.14991e-5 kg
- Benzene [air, unspecified]: 2.69616e-14 kg
- Benzo(a)pyrene [air, non-urban air or from high stacks]: 1.5547e-7 kg
- Benzo(a)pyrene [air, unspecified]: 1.37145e-11 kg
- Beryllium II [air, non-urban air or from high stacks]: 7.14646e-12 kg
- Cadmium II [air, non-urban air or from high stacks]: 1.54552e-7 kg
- Cadmium II [air, unspecified]: 6.13859e-11 kg
- Calcium [air, unspecified]: 2.09962e-11 kg
- Carbon dioxide, fossil [air, non-urban air or from high stacks]: 0.00323845 kg
- Carbon dioxide, fossil [air, unspecified]: 0.00475195 kg
- Carbon dioxide, non-fossil [air, unspecified]: 4.55899e-11 kg
- Carbon disulfide [air, non-urban air or from high stacks]: 1.85927e-8 kg
- Carbon monoxide, fossil [air, non-urban air or from high stacks]: 0.000338426 kg
- Carbon monoxide, fossil [air, unspecified]: 0.000126265 kg
- Chlorine [air, unspecified]: 8.4755e-12 kg
- Chromium III [air, non-urban air or from high stacks]: 6.31879e-10 kg
- Chromium III [air, unspecified]: 3.10779e-8 kg
- Cobalt II [air, non-urban air or from high stacks]: 5.41459e-11 kg
- Cobalt II [air, unspecified]: 8.55845e-11 kg
- Copper ion [air, non-urban air or from high stacks]: 1.22342e-6 kg
- Copper ion [air, unspecified]: 2.13425e-9 kg
- Cyanide [air, non-urban air or from high stacks]: 6.52936e-8 kg
- Dinitrogen monoxide [air, unspecified]: 3.07795e-10 kg
- Dioxins, measured as 2,3,7,8-tetrachlorodibenzo-p-dioxin [air, non-urban air or from high stacks]: 9.70868e-16 kg
- Dioxins, measured as 2,3,7,8-tetrachlorodibenzo-p-dioxin [air, unspecified]: 1.04446e-14 kg
- Ethane [air, non-urban air or from high stacks]: 5.69328e-6 kg
- Ethanol [air, non-urban air or from high stacks]: 8.50011e-10 kg
- Formaldehyde [air, unspecified]: 1.16425e-13 kg
- Hydrocarbons, unspecified [air, non-urban air or from high stacks]: 5.84012e-12 kg
- Hydrochloric acid [air, non-urban air or from high stacks]: 2.9278e-10 kg
- Hydrochloric acid [air, unspecified]: 2.31914e-7 kg
- Hydrogen [air, unspecified]: 1.88202e-6 kg
- Hydrogen fluoride [air, unspecified]: 1.21925e-8 kg
- Hydrogen sulfide [air, unspecified]: 3.94369e-8 kg
- Lead II [air, non-urban air or from high stacks]: 1.10913e-6 kg
- Lead II [air, unspecified]: 3.6373e-9 kg
- Manganese II [air, non-urban air or from high stacks]: 1.33218e-7 kg
- Manganese II [air, unspecified]: 5.60854e-10 kg
- Mercury II [air, non-urban air or from high stacks]: 8.93097e-10 kg
- Mercury II [air, unspecified]: 4.63342e-11 kg
- Methane, chlorodifluoro-, HCFC-22 [air, non-urban air or from high stacks]: 6.50945e-8 kg
- Methane, fossil [air, non-urban air or from high stacks]: 5.23543e-5 kg
- Methane, fossil [air, unspecified]: 8.14749e-7 kg
- Methanol [air, non-urban air or from high stacks]: 8.50011e-8 kg
- Molybdenum VI [air, unspecified]: 5.90629e-16 kg
- NMVOC, non-methane volatile organic compounds [air, non-urban air or from high stacks]: 0.000209026 kg
- NMVOC, non-methane volatile organic compounds [air, unspecified]: 1.33198e-7 kg
- Nickel II [air, non-urban air or from high stacks]: 8.62309e-7 kg
- Nickel II [air, unspecified]: 1.38292e-9 kg
- Nitrogen [air, unspecified]: 3.05013e-8 kg
- Nitrogen oxides [air, non-urban air or from high stacks]: 1.68609e-5 kg
- Nitrogen oxides [air, unspecified]: 4.07595e-6 kg
- PAH, polycyclic aromatic hydrocarbons [air, non-urban air or from high stacks]: 4.55861e-8 kg
- PAH, polycyclic aromatic hydrocarbons [air, unspecified]: 7.32361e-11 kg
- Particulate Matter, < 2.5 um [air, non-urban air or from high stacks]: 4.91695e-5 kg
- Particulate Matter, < 2.5 um [air, unspecified]: 9.15945e-7 kg
- Particulate Matter, > 10 um [air, non-urban air or from high stacks]: 8.28599e-5 kg
- Particulate Matter, > 10 um [air, unspecified]: 6.76961e-7 kg
- Particulate Matter, > 2.5 um and < 10um [air, non-urban air or from high stacks]: 2.26401e-5 kg
- Particulate Matter, > 2.5 um and < 10um [air, unspecified]: 1.8566e-7 kg
- Phenol, pentachloro- [air, non-urban air or from high stacks]: 6.84786e-8 kg
- Phosphorus [air, non-urban air or from high stacks]: 9.15702e-10 kg
- Polychlorinated biphenyls [air, unspecified]: 4.44581e-13 kg
- Propane [air, non-urban air or from high stacks]: 5.69328e-8 kg
- Selenium IV [air, non-urban air or from high stacks]: 4.44497e-8 kg
- Selenium IV [air, unspecified]: 3.56246e-10 kg
- Silver I [air, non-urban air or from high stacks]: 2.58785e-12 kg
- Silver I [air, unspecified]: 1.26659e-14 kg
- Styrene [air, non-urban air or from high stacks]: 8.71908e-10 kg
- Sulfur dioxide [air, non-urban air or from high stacks]: 0.000300894 kg
- Sulfur dioxide [air, unspecified]: 3.94724e-6 kg
- Sulfur oxides [air, unspecified]: 5.5298e-11 kg
- Sulfur trioxide [air, unspecified]: 2.08946e-8 kg
- Sulfuric acid [air, non-urban air or from high stacks]: 1.93073e-11 kg
- Sulfuric acid [air, unspecified]: 3.84376e-10 kg
- Thallium I [air, non-urban air or from high stacks]: 3.0258e-11 kg
- Tin ion [air, non-urban air or from high stacks]: 5.53707e-8 kg
- Titanium ion [air, unspecified]: 4.42998e-11 kg
- Toluene [air, non-urban air or from high stacks]: 6.74833e-8 kg
- VOC, volatile organic compounds [air, unspecified]: 9.04763e-10 kg
- Vanadium V [air, non-urban air or from high stacks]: 3.32224e-9 kg
- Vanadium V [air, unspecified]: 6.56902e-11 kg
- Water [air, non-urban air or from high stacks]: 4.63842e-9 m3
- Water [air, unspecified]: 1.4286e-5 m3
- Zinc II [air, non-urban air or from high stacks]: 3.38452e-7 kg
- Zinc II [air, unspecified]: 2.69565e-10 kg
- Sulfur [soil, industrial]: 3.79847e-8 kg
- Acidity, unspecified [water, surface water]: 7.69845e-13 kg
- Aluminium III [water, surface water]: 7.69581e-13 kg
- Ammonium [water, ocean]: 1.10752e-11 kg
- Ammonium [water, surface water]: 3.62348e-7 kg
- Antimony ion [water, surface water]: 1.87759e-12 kg
- Arsenic ion [water, ocean]: 1.31752e-12 kg
- Arsenic ion [water, surface water]: 4.93522e-11 kg
- BOD5, Biological Oxygen Demand [water, surface water]: 1.71945e-7 kg
- COD, Chemical Oxygen Demand [water, ocean]: 2.36225e-11 kg
- COD, Chemical Oxygen Demand [water, surface water]: 2.73295e-7 kg
- Cadmium II [water, ocean]: 3.295e-13 kg
- Cadmium II [water, surface water]: 7.40253e-12 kg
- Calcium II [water, surface water]: 1.21899e-10 kg
- Carbonate [water, unspecified]: 1.19926e-7 kg
- Chloride [water, surface water]: 2.82677e-5 kg
- Chloride [water, unspecified]: 1.42049e-7 kg
- Chromium III [water, surface water]: 7.56834e-11 kg
- Chromium VI [water, surface water]: 8.49472e-16 kg
- Cobalt II [water, ocean]: 1.38173e-11 kg
- Cobalt II [water, surface water]: 1.08231e-10 kg
- Copper ion [water, ocean]: 3.01515e-12 kg
- Copper ion [water, surface water]: 1.79938e-10 kg
- Cyanide [water, ocean]: 6.13571e-15 kg
- Cyanide [water, surface water]: 1.04385e-13 kg
- DOC, Dissolved Organic Carbon [water, surface water]: 1.01207e-7 kg
- Dissolved solids [water, surface water]: 7.59215e-12 kg
- Fluoride [water, ocean]: 9.65103e-12 kg
- Fluoride [water, surface water]: 1.2934e-11 kg
- Hydrogen sulfide [water, surface water]: 5.81323e-8 kg
- Iron ion [water, ocean]: 6.65849e-10 kg
- Iron ion [water, surface water]: 4.75168e-12 kg
- Lead II [water, ocean]: 1.41228e-13 kg
- Lead II [water, surface water]: 4.32941e-11 kg
- Magnesium [water, surface water]: 2.99419e-10 kg
- Manganese II [water, surface water]: 2.90825e-11 kg
- Mercury II [water, ocean]: 3.55119e-14 kg
- Mercury II [water, surface water]: 7.85748e-13 kg
- Nickel II [water, ocean]: 1.9273e-11 kg
- Nickel II [water, surface water]: 1.04478e-10 kg
- Nitrate [water, ocean]: 1.38054e-12 kg
- Nitrate [water, surface water]: 6.85685e-11 kg
- Nitrogen [water, ocean]: 7.47247e-9 kg
- Nitrogen [water, surface water]: 3.11829e-15 kg
- Nitrogen dioxide [water, surface water]: 7.81344e-14 kg
- PAH, polycyclic aromatic hydrocarbons [water, surface water]: 4.35954e-10 kg
- Phenol [water, surface water]: 4.68806e-15 kg
- Phosphorus [water, surface water]: 7.43288e-13 kg
- Selenium IV [water, surface water]: 8.49261e-14 kg
- Sodium I [water, surface water]: 1.81752e-5 kg
- Sodium I [water, unspecified]: 9.18877e-8 kg
- Solids, inorganic [water, surface water]: 1.5985e-5 kg
- Sulfate [water, surface water]: 2.53318e-9 kg
- Sulfuric acid [water, surface water]: 3.09553e-9 kg
- Suspended solids, unspecified [water, surface water]: 5.65063e-9 kg
- TOC, Total Organic Carbon [water, surface water]: 1.01207e-7 kg
- TOC, Total Organic Carbon [water, unspecified]: 6.81814e-8 kg
- Thallium I [water, ocean]: 6.35542e-14 kg
- Tin ion [water, surface water]: 7.56685e-11 kg
- Water [water, surface water]: 8.12989e-10 m3
- Water [water, unspecified]: 2.3729e-5 m3
- Zinc II [water, ocean]: 6.44865e-12 kg
- Zinc II [water, surface water]: 2.34852e-10 kg
