# natural gas, liquefied, import from US

Dataset: EcoSpold 2, unit process
Geography: Europe without Switzerland
Time period: 2000-01-01 to 2022-12-31
Technology level: current
Classification: ISIC rev.4 ecoinvent: 0620:Extraction of natural gas
Scenario: Business-as-Usual
System model: Allocation at the point of substitution
Share of production covered: 100 %
Generated by: Maresa Bussa
Published in: Bussa, M. 2022
Database: ecoinvent
isCopyrightProtected: true

## General comment
This dataset describes the import of 1 m3 of ‘natural gas, liquefied’ (LNG) from production in the United States to the geography Europe without Switzerland. The reference flow refers to 1 standard cubic meter of natural gas in the gaseous state. At a density of 410-500 kg/m3, the volume of liquified natural gas is around 1/600th of the gaseous volume at standard conditions. (Engineering Tool Box 2008)
As a general trend, the share of liquefied natural gas (LNG) in inter-regional trade of natural gas has increased steadily over the past decades, and it equaled the volume exported in pipelines around 2019-2020. (BP 2022)
References:
BP (2022). Statistical Review of World Energy 2022 (71st edition). [online] Availble at: https://www.bp.com/en/global/corporate/energy-economics/statistical-review-of-world-energy.html [Accessed June 14, 2022]
Engineering ToolBox (2008). LNG - Liquefied Natural Gas. [online] Available at: https://www.engineeringtoolbox.com/liquefied-natural-gas-lng-d_1092.html [Accessed Aug 16, 2022]

## Included activities start
This activity starts at the gate of the activities that produce "natural gas, liquefied" at the place of produciton. This dataset describes the transfer of liquefied natural gas (LNG) via tanker ship, modelled separately, between the liquefaction plant in the place of origin and the evaporation plant at the destination.

## Included activities end
This activity ends with the supply of "natural gas, liquefied", to the consumers of this product.

## Geography
Europe without Switzerland

## Time period
Transport modes investigated for 2019.

## Reference product
- natural gas, liquefied: 1 m3; By-product classification allocatable product; CPC 12020: Natural gas, liquefied or in the gaseous state; CAS 14493-06-2
  production volume 1.72e10 m3
    Based on BP's LNG trade statistics for 2019
  property carbon content, fossil 0.741
    Set equal to that of "natural gas, high pressure" (based on composition in Bussa et al. (2021), tab. 3.1).
  property heating value, gross 40 MJ
    Set equal to that of "natural gas, high pressure" (at standard conditions; based on Meili et al. 2022, section 5.2)
  property heating value, net 36 MJ
    (same comment as for natural gas, liquefied)
  property price 0.27 EUR2005
    Calculated value based on data from United Nations Commodity Trade Statistics Database (comtrade.un.org). UN comtrade category: 271111 Natural gas, liquified. Year 2005. Using exchange rate of 1EURO = 1.209 USD. Average of price of import into 5 main markets (EU, US, JP, IN and CN).
  properties: carbon allocation 0.544635 kg, carbon content 0.741, carbon content, non-fossil 0, dry mass 0.735 kg, water content 0, water in wet mass 0 kg, wet mass 0.735 kg

## Inputs from technosphere
- natural gas, liquefied: 1 m3; lognormal variance with pedigree 0.120595, pedigree (1,1,1,1,5)
  input of natural gas
  properties: carbon content, fossil 0.741, dry mass 0.735 kg, heating value, gross 40 MJ, heating value, net 36 MJ, wet mass 0.735 kg
  note on carbon content, fossil: Set equal to that of "natural gas, high pressure" (based on composition in Bussa et al. (2021), tab. 3.1).
  note on heating value, gross: Set equal to that of "natural gas, high pressure" (at standard conditions; based on Meili et al. 2022, section 5.2)
- transport, freight, sea, tanker for liquefied natural gas: 7.372 metric ton*km; lognormal variance with pedigree 0.244713, pedigree (3,3,3,1,5)
  Average weighted distance based on BP statistics 2019 (Bussa et al. 2022). The supplying dataset for transport of LNG by tanker available in the ecoinvent dataset differs from that used by Bussa et al.

## Sampling procedure
Literature. Online calculators for distances.
