# treatment of sewage sludge, 75% water, WWT, WW from LCD production, sanitary landfill

Dataset: EcoSpold 2, unit process
Geography: GLO
Time period: 1994-01-01 to 2022-12-31
Technology level: current
Classification: ISIC rev.4 ecoinvent: 3821:Treatment and disposal of non-hazardous waste
Scenario: Business-as-Usual
System model: Allocation at the point of substitution
Generated by: Nikolia Stoikou
Database: ecoinvent
isCopyrightProtected: true

## General comment
The process represents the treatment of a waste (sewage sludge) that is exclusively generated from another waste treatment. Sewage sludge is generated in the wastewater treatment of 'wastewater from LCD production'. Recommended use of this dataset: to be used within the specific chain of treatments for 'wastewater from LCD production'. Share of biogenic carbon in the sludge: 0%. Landfill gas capture and utilisation generates 0.03321 kWh of electricity and 0.0599 MJ of useful heat. 0.002598 kg waste mass remains in the landfill even after the long term period. "LCD" stands for "Liquid-crystal display".

## Included activities start
The activity starts with the waste being available at the gate of the treatment facility. Collection and transportation of the waste to the treatment plant is not included.

## Included activities end
The activity ends with the waste being treated and waste-specific emissions from the landfill are released to the environment (air due to landfil gas and water due to landfil leachate).

## Geography
Landfill site with mean annual temperature (MAT) of 16.743579766537 degC, mean annual precipitation (MAP) of 1250.84108527132 mm/year, and net infiltration of 790.252035689178 mm/year.The leachate percolating through the landfill has an average residence time of 6.33 years.
References: UN data, 2020. Precipitation, Environment Statistics Database, United Nations Statistics Division Available at: http://data.un.org/Data.aspx?q=precipitation&d=ENV&f=variableID%3a6;
World Bank, 2022. Surface area (sq.km), World Bank Group Available at: https://data.worldbank.org/indicator/AG.SRF.TOTL.K2;
Doka G.,2021. A model for composition-specific life cycle inventories of regionalised wastewater fates, Zurich, Switzerland. http://www.doka.ch/publications.htm

## Technology
Sanitary (controlled) landfill for municipal solid waste. Ultimate average landfill height is 20 meters. Operation phase duration is 30 years. The total raw landfill gas mass produced in the landfill from this waste is 0.1355 kg. The total CH4 mass in the raw landfill gas is 0.05497 kg. Percentage of landfill gas directly emitted is 47w%. Percentage of landfill gas captured and flared is 18.02w%. Percentage of landfill gas captured and utilised is 34.98%. Conversion efficiencies are 27.8e% for electricity and 13.5e% for useful heat. Leachate generated during the first 100 years is collected and treated region-specifically before emission. Based on average waste composition and climate data the end of carbonate phase is estimated to be reached 2'863 years after waste deposition.

## Reference product
- heat, district or industrial, other than natural gas: 1 MJ; By-product classification allocatable product; CPC 17300: Steam and hot water; lognormal variance with pedigree 0.11427, pedigree (1,1,1,1,1)
  Net production of heat from landfill gas utilisation.
  Uncertainty: Uncertainty calculated depending on waste input and uncertainty of transfer coefficients in landfill to landfill gas, uncertainty in gas capture and utilisation.
  production volume 0.0233336 MJ
    Calculated from the production volume of the reference product in proportion to the respective output amounts.
  property corresponding fuel use, propane, furnace >100kW 0 MJ; name fuel_use
    Lower heating value of the fuel input related to the heat/electricity output, taken directly from ecoinvent v3.0 dataset "heat production, natural gas, at industrial furnace >100kW, GLO 2000".
  property price 0.0106 EUR2005
    Average European district heat price from Ecoheatcool and Euroheat 2005-2006, Ecoheat Work package 1: The European heat market. Final report. 10.6 EUR/GJ i s the price of district heat. http://www.solarthermalworld.org/files/Ecoheatcool%20WP1%20Web.pdf?download
  properties: carbon allocation 0 kg, carbon content 0, carbon content, fossil 0, carbon content, non-fossil 0, dry mass 1 kg, heating value, net 1 MJ, water content 0, water in wet mass 0 kg, wet mass 1 kg

## Inputs from technosphere
- N-methyl-2-pyrrolidone: 1.97038e-7 kg
- acetic acid, without water, in 98% solution state: 1.63656e-6 kg
- acetone, liquid: 6.22156e-7, 2.01164e-6 kg (2 suppliers, which the file names only by identifier); sum of these 2.6338e-6 kg
- aluminium sulfate, powder: 2.21777e-5, 4.67182e-6 kg (2 suppliers, which the file names only by identifier); sum of these 2.68495e-5 kg
- ammonia, anhydrous, liquid: 3.63447e-7, 3.80932e-8, 8.04352e-7, 3.70964e-7, 1.39999e-6, 1.87228e-7, 1.70291e-7, 4.02858e-6, 1.20346e-7 kg (9 suppliers, which the file names only by identifier); sum of these 7.48329e-6 kg
- argon, crude, liquid: 2.01244e-6 kg
- carbon dioxide, liquid: 7.90042e-9, 1.66306e-9 kg (2 suppliers, which the file names only by identifier); sum of these 9.56348e-9 kg
- chemical, organic: 0.00015414 kg
- chlorine, liquid: 3.30282e-6, 6.60687e-7 kg (2 suppliers, which the file names only by identifier); sum of these 3.9635e-6 kg
- cyclohexanol: 3.47483e-9, 1.71607e-9 kg (2 suppliers, which the file names only by identifier); sum of these 5.1909e-9 kg
- dimethyl sulfoxide: 1.69538e-5 kg
- electricity, medium voltage: 0.0183969 kWh
- electronic component factory: 1.8636e-11 unit
- ethanol, without water, in 99.7% solution state, from ethylene: 1.06984e-6, 2.38219e-6 kg (2 suppliers, which the file names only by identifier); sum of these 3.45203e-6 kg
- ethylene glycol: 1.97038e-7 kg
- glass fibre: 3.56217e-10 kg
- heat, district or industrial, natural gas: 0.0472262 MJ
- heat, district or industrial, other than natural gas: 0.011895 MJ
- hydrochloric acid, without water, in 30% solution state: 2.01192e-6, 9.00911e-6 kg (2 suppliers, which the file names only by identifier); sum of these 1.1021e-5 kg
- hydrogen fluoride: 2.73676e-7, 8.02897e-7 kg (2 suppliers, which the file names only by identifier); sum of these 1.07657e-6 kg
- hydrogen peroxide, without water, in 50% solution state: 3.10484e-8, 6.54045e-9 kg (2 suppliers, which the file names only by identifier); sum of these 3.75888e-8 kg
- hydrogen, liquid: 2.03595e-5, 9.317e-5 kg (2 suppliers, which the file names only by identifier); sum of these 0.00011353 kg
- isopropanol: 7.37136e-5, 1.55281e-5 kg (2 suppliers, which the file names only by identifier); sum of these 8.92417e-5 kg
- krypton, gaseous: 6.59731e-9 kg
- lime, hydrated, packed: 3.52443e-5, 2.99165e-7 kg (2 suppliers, which the file names only by identifier); sum of these 3.55435e-5 kg
- methyl ethyl ketone: 1.36456e-9, 5.14922e-10 kg (2 suppliers, which the file names only by identifier); sum of these 1.87949e-9 kg
- nitric acid, without water, in 50% solution state: 6.85992e-8, 8.92424e-7, 1.01928e-7, 2.53475e-7, 3.29637e-7, 1.21452e-7, 4.17717e-7, 1.10124e-7, 1.0155e-7, 7.73902e-7 kg (10 suppliers, which the file names only by identifier); sum of these 3.17081e-6 kg
- nitrogen, liquid: 0.00118378, 0.000324938 kg (2 suppliers, which the file names only by identifier); sum of these 0.00150871 kg
- oxygen, liquid: 4.26682e-7, 1.55503e-6 kg (2 suppliers, which the file names only by identifier); sum of these 1.98171e-6 kg
- phosphoric acid, industrial grade, without water, in 85% solution state: 1.01e-5 kg
- polarizer, liquid crystals and colour filters, for liquid crystal display: 2.03831e-5 kg
- polycarbonate: 2.35857e-7 kg
- printed wiring board mounting facility: 4.07221e-11 unit
- propylene glycol, liquid: 3.43375e-6, 1.69578e-6 kg (2 suppliers, which the file names only by identifier); sum of these 5.12953e-6 kg
- refinery sludge: -7.39396e-7, -7.12816e-6, -3.38323e-8 kg (3 suppliers, which the file names only by identifier); sum of these -7.90139e-6 kg
- sludge, NaCl electrolysis: -1.46522e-5 kg
- sodium hydroxide, without water, in 50% solution state: 9.17994e-5 kg
- sodium phosphate: 3.70802e-5, 7.81108e-6 kg (2 suppliers, which the file names only by identifier); sum of these 4.48912e-5 kg
- spent solvent mixture: -0.000612302, -5.6052e-6, -0.000239248 kg (3 suppliers, which the file names only by identifier); sum of these -0.000857155 kg
- sulfuric acid: 5.17825e-5, 6.77424e-6 kg (2 suppliers, which the file names only by identifier); sum of these 5.85567e-5 kg
- toluene diisocyanate: 6.30861e-9, 1.16516e-9 kg (2 suppliers, which the file names only by identifier); sum of these 7.47377e-9 kg
- used printed wiring boards: -1.95779e-7 kg
- waste glass: -3.44657e-7, -8.25571e-7, -8.95725e-6, -7.70246e-8, -1.70146e-5, -1.16966e-7, -8.44144e-5, -1.87294e-8 kg (8 suppliers, which the file names only by identifier); sum of these -0.000111769 kg
- waste mineral oil: -2.79755e-8, -2.95886e-6, -1.13005e-6 kg (3 suppliers, which the file names only by identifier); sum of these -4.11688e-6 kg
- waste plastic, consumer electronics: -0.000193715, -2.92654e-6 kg (2 suppliers, which the file names only by identifier); sum of these -0.000196642 kg
- wastewater from liquid crystal display production: -1.76595e-6, -0.000365177 m3 (2 suppliers, which the file names only by identifier); sum of these -0.000366943 m3
- xylene: 3.40064e-7, 6.13944e-8 kg (2 suppliers, which the file names only by identifier); sum of these 4.01458e-7 kg

## Inputs from nature
- Water, unspecified natural origin [natural resource, in water]: 0.000366943 m3

## Emissions to nature
- Acetic acid [air, urban air close to ground]: 3.47766e-7 kg
- Acetone [air, urban air close to ground]: 4.75612e-8 kg
- Ammonia [air, urban air close to ground]: 1.59306e-5 kg
- Boric acid [air, urban air close to ground]: 3.50319e-10 kg
- Boron trifluoride [air, urban air close to ground]: 2.34737e-6 kg
- Cyclohexane [air, urban air close to ground]: 1.24016e-8 kg
- Diethylene glycol [air, urban air close to ground]: 2.47777e-8 kg
- Hydrochloric acid [air, urban air close to ground]: 1.54957e-5 kg
- Hydrogen [air, urban air close to ground]: 3.40087e-8 kg
- Hydrogen fluoride [air, urban air close to ground]: 1.33226e-5 kg
- NMVOC, non-methane volatile organic compounds [air, urban air close to ground]: 2.73101e-5 kg
- Nitrogen fluoride [air, urban air close to ground]: 6.85584e-9 kg
- Nitrogen oxides [air, urban air close to ground]: 6.87852e-8 kg
- Phosphine [air, urban air close to ground]: 1.60072e-5 kg
- Phosphoric acid [air, urban air close to ground]: 1.24016e-8 kg
- Sodium tetrahydridoborate [air, urban air close to ground]: 4.55159e-6 kg
- Sulfur hexafluoride [air, urban air close to ground]: 2.74191e-8 kg
- Tetramethyl ammonium hydroxide [air, urban air close to ground]: 0.000164422 kg
- Antimony ion [water, surface water]: 2.91511e-11 kg
- Arsenic ion [water, surface water]: 2.91511e-11 kg
- BOD5, Biological Oxygen Demand [water, surface water]: 4.44927e-6 kg
- Boron [water, surface water]: 1.17113e-9 kg
- COD, Chemical Oxygen Demand [water, surface water]: 6.853e-7 kg
- Cadmium II [water, surface water]: 2.91511e-11 kg
- Chromium III [water, surface water]: 2.26047e-9 kg
- Chromium VI [water, surface water]: 5.85567e-11 kg
- Copper ion [water, surface water]: 2.34737e-10 kg
- Cyanide [water, surface water]: 9.35895e-10 kg
- DOC, Dissolved Organic Carbon [water, surface water]: 2.53815e-7 kg
- Ethane, 1,1,1-trichloro-, HCFC-140 [water, surface water]: 5.85567e-12 kg
- Fluoride [water, surface water]: 3.27303e-6 kg
- Hydrocarbons, aromatic [water, surface water]: 1.50351e-7 kg
- Iron ion [water, surface water]: 6.72515e-10 kg
- Lead II [water, surface water]: 1.57774e-9 kg
- Manganese II [water, surface water]: 5.85567e-11 kg
- Mercury II [water, surface water]: 2.47777e-11 kg
- Nickel II [water, surface water]: 5.85567e-11 kg
- Nitrogen [water, surface water]: 2.02776e-5 kg
- Oils, unspecified [water, surface water]: 5.16529e-8 kg
- Phenol [water, surface water]: 5.85567e-11 kg
- Phosphate [water, surface water]: 5.85567e-11 kg
- Phosphorus [water, surface water]: 1.1021e-6 kg
- Solids, inorganic [water, surface water]: 1.93055e-6 kg
- TOC, Total Organic Carbon [water, surface water]: 2.53815e-7 kg
