# sugar beet pulp to generic market for energy feed

Dataset: EcoSpold 2, unit process
Geography: GLO
Time period: 2012-01-01 to 2022-12-31
Technology level: current
Classification: ISIC rev.4 ecoinvent: 1072:Manufacture of sugar
Scenario: Business-as-Usual
System model: Allocation at the point of substitution
Generated by: Tereza Levova
Database: ecoinvent
isCopyrightProtected: true

## General comment
This is a linking activity that converts sugar beet pulp into gross energy for the feed market and protein, 100% crude for the feed market.
The naming of the dataset is based on the feed nomenclature system of the National Research Council (USA). Products with less than 20 percent of protein are classified as energy feeds. Products with more than 20 percent of protein are classified as protein feeds.

## Included activities start
The activity starts with the reception of sugar beet pulp

## Included activities end
The activity ends with the conversion of sugar beet pulp into gross energy and crude protein

## Reference product
- protein feed, 100% crude: 1 kg; name protein_output; = 0.09* sugar_beet_pulp*(-1)*0.25; source Agroscope 2011; By-product classification allocatable product; CPC 23319: Preparations used in animal feeding n.e.c.; lognormal variance with pedigree 0.0026, pedigree (3,1,1,1,1)
  Calculated based on crude protein content of sugar beet pulp (0.09kg/kg dry mass). The dry mass of the reference product is 0.25kg/kg.
  production volume 1.66115e9 kg
    Calculated from production volume of reference product using the relative outputs.
  property carbon content, non-fossil 0.53
    considered pure protein (ecoinvent v2.2 report 17, pg 288). C-content in protein is estimated to be 53% ( from "Evolutionary and Biochemical Aspects", A.D. Kay and T. Vrede (in Global Ecology, 2010, Elsevier B.V., S.E. Jørgensen Ed.).
  property price 0.424 EUR2005
    Based on protein content and energy feed, gross content in soybean meal and prices per kg of soybean meal. Assumed soybean meal is the most used feed. Soybean meal 2004 prices for World import/export data (tonnes and US$) from FaoStat statistics (http://faostat.fao.org/site/535/default.aspx#ancor, TRADE)- [Accessed 24 May 2010]. See calculations for protein /energy content
  properties: carbon allocation 0.53 kg, carbon content 0.53, carbon content, fossil 0, dry mass 1 kg, water content 0, water in wet mass 0 kg, wet mass 1 kg

## Inputs from technosphere
- chemical, inorganic: 0.000680817 kg
- chemical, organic: 0.000472799 kg
- coke: 0.0127844 MJ
- electricity, medium voltage: 0.032718, 0.0102091, 0.000304026, 0.00155126, 0.0222893, 0.093669, 0.00694352, 0.00512356, 0.000984753 kWh (9 suppliers, which the file names only by identifier); sum of these 0.173792 kWh
- ethanol fermentation plant: 1.0594e-11 unit
- heat, central or small-scale, other than natural gas: 0.0141222, 0.00019397 MJ (2 suppliers, which the file names only by identifier); sum of these 0.0143162 MJ
- heat, district or industrial, natural gas: 0.422126, 1.14303, 0.018783, 0.00880296 MJ (4 suppliers, which the file names only by identifier); sum of these 1.59274 MJ
- lime: 0.000859398, 0.146963 kg (2 suppliers, which the file names only by identifier); sum of these 0.147823 kg
- limestone residue: -0.00108299, -0.1852 kg (2 suppliers, which the file names only by identifier); sum of these -0.186283 kg
- soda ash, light: 0.00175881 kg
- sodium phosphate: 0.000142687 kg
- sodium sulfate, anhydrite: 9.51312e-5 kg
- sugar beet: 0.0295997, 5.30036 kg (2 suppliers, which the file names only by identifier); sum of these 5.32996 kg
- sugar beet pulp: -1.07764 kg
- sugar refinery: 7.99038e-11 unit
- sulfuric acid: 0.00103358, 1.86913e-6 kg (2 suppliers, which the file names only by identifier); sum of these 0.00103545 kg
- tap water: 0.0062866, 0.261986, 0.0103896, 0.0325508, 0.0193866, 2.99804, 0.00681549, 2.23403, 0.052226 kg (9 suppliers, which the file names only by identifier); sum of these 5.62171 kg
- transport, tractor and trailer, agricultural: 0.0506176, 0.000295997 metric ton*km (2 suppliers, which the file names only by identifier); sum of these 0.0509136 metric ton*km
- wastewater, average: -5.1545e-5, -2.52544e-5, -0.00709317, -0.00169612 m3 (4 suppliers, which the file names only by identifier); sum of these -0.00886609 m3

## Inputs from nature
- Carbon dioxide, in air [natural resource, in air]: 0.331789 kg
- Water, cooling, unspecified natural origin [natural resource, in water]: 1.24875e-8 m3

## Emissions to nature
- Carbon dioxide, non-fossil [air, urban air close to ground]: 0.355911 kg
- Water [air, unspecified]: 0.00190367 m3
- Water [water, unspecified]: 2.27482e-5 m3

## Sampling procedure
inventory based on gross energy and protein composition of raw material. Data obtained from Agroscope database of feedstuff compositions.

## Review by Bo Weidema 2012-03-14
Production volumes are for 2005, even though the dataset is indicated to be valid for 2012.
