# treatment of spent solvent mixture, hazardous waste incineration, with energy recovery

Dataset: EcoSpold 2, unit process
Geography: CH
Time period: 1997-01-01 to 2022-12-31
Technology level: current
Classification: ISIC rev.4 ecoinvent: 3822:Treatment and disposal of hazardous waste
Synonyms: waste solvents mixture from chemical production
Tags: Treatment; ConvertedDataset
Scenario: Business-as-Usual
System model: Allocation at the point of substitution
Share of production covered: 39 %
Generated by: Gabor Doka (obsolete)
Published in: Doka G. 2008
Database: ecoinvent
isCopyrightProtected: true

## General comment
Inventoried waste contains 100% waste solvents mixture; . waste composition (wet, in ppm): upper heating value 23.68 MJ/kg; lower heating value 21.7 MJ/kg; H2O 165000; O 200000; H 81660; C 477000; S 6420; N 10360; P 1000; B n.a.; Cl 24448; Br 2505.2; F 44.921; I 100.24; Ag n.a.; As n.a.; Ba n.a.; Cd n.a.; Co 4.1029; Cr n.a.; Cu 5.1445; Hg n.a.; Mn n.a.; Mo n.a.; Ni 4.2554; Pb n.a.; Sb n.a.; Se n.a.; Sn n.a.; V n.a.; Zn 41.844; Be n.a.; Sc n.a.; Sr n.a.; Ti n.a.; Tl n.a.; W n.a.; Si 31321; Fe 84.652; Ca n.a.; Al n.a.; K n.a.; Mg n.a.; Na n.a.; Share of carbon in waste that is biogenic 0%. Net energy produced in HWI: 17.11MJ/kg thermal energy and 1.27MJ/kg electric energy. Allocation of energy production: no substitution or expansion. 100% of burden allocated to waste disposal function of HWI. One kg of this waste produces 0.07563 kg of residues, which are landfilled. Additional solidification with 0.03025 kg of cement.
[This dataset is meant to replace the following datasets:]

## Included activities end
waste-specific air and water emissions from incineration, auxiliary material consumption for flue gas cleaning. Short-term emissions to river water and long-term emissions to ground water from residual material landfill (from solidified fly ashes and scrubber slugde). Process energy demands for HWI.

## Geography
Specific to the technology encountered in Switzerland in 2000. Well applicable to modern incineration practices in Europe or North America or Japan.

## Technology
Swiss HWI plant in 2000 with wet flue gas scrubber and low-dust SCR DeNOx facility. Gross thermal efficiency 74.4% and gross electric efficiency 10%.

## Time period
Transfer coefficients for modern Swiss MSWI. Emission speciation based on early 90ies data.

## Reference product
- heat, district or industrial, other than natural gas: 1 MJ; name BP2; By-product classification allocatable product; CPC 17300: Steam and hot water; lognormal variance with pedigree 0.120025, pedigree (1,1,1,2,1)
  production volume 2.13875e9 MJ
    Calculated based on the production volume of the reference product.
  property corresponding fuel use, propane, furnace >100kW 0 MJ; name fuel_use
    Lower heating value of the fuel input related to the heat/electricity output, taken directly from ecoinvent v3.0 dataset "heat production, natural gas, at industrial furnace >100kW, GLO 2000".
  property price 0.0106 EUR2005
    Average European district heat price from Ecoheatcool and Euroheat 2005-2006, Ecoheat Work package 1: The European heat market. Final report. 10.6 EUR/GJ i s the price of district heat. http://www.solarthermalworld.org/files/Ecoheatcool%20WP1%20Web.pdf?download
  properties: carbon allocation 0 kg, carbon content 0, heating value, net 1 MJ

## Inputs from technosphere
- DTPA, diethylenetriaminepentaacetic acid: 1.97705e-6, 9.7638e-7 kg (2 suppliers, which the file names only by identifier); sum of these 2.95343e-6 kg
- H3PO4 purification residue: -0.000932037 kg
- activated carbon, granular: 6.99357e-7 kg
- air compressor, screw-type compressor, 300kW: 3.17774e-9 unit
- allyl chloride: 0.000199202 kg
- aluminium casting facility: 3.84068e-14 unit
- aluminium oxide, non-metallurgical: 1.40212e-5, 8.28188e-5 kg (2 suppliers, which the file names only by identifier); sum of these 9.684e-5 kg
- aluminium scrap, new: -1.20461e-5, -1.20461e-5 kg (2 suppliers, which the file names only by identifier); sum of these -2.40922e-5 kg
- aluminium scrap, post-consumer: -3.33675e-8 kg
- aluminium sulfate, powder: 6.37373e-7 kg
- aluminium, primary, ingot: 2.042e-5, 3.70231e-6, 3.1825e-9 kg (3 suppliers, which the file names only by identifier); sum of these 2.41255e-5 kg
- aluminium, wrought alloy: 0.0002332 kg
- ammonia, anhydrous, liquid: 2.78277e-7, 2.91664e-8, 2.14765e-7, 1.07192e-6, 1.43353e-7, 1.30385e-7, 3.08452e-6, 9.21442e-8 kg (8 suppliers, which the file names only by identifier); sum of these 5.04453e-6 kg
- antimony: 4.52116e-8 kg
- average incineration residue: -3.39846e-9, -2.88472e-11 kg (2 suppliers, which the file names only by identifier); sum of these -3.4273e-9 kg
- barium hydroxide: 1.23018e-5 kg
- bentonite: 3.23122e-8 kg
- benzene: 1.60845e-8 kg
- brick production facility: 4.11408e-15 unit
- building, hall: 9.22279e-9 m2
- building, hall, steel construction: 1.58582e-6 m2
- chemical factory, organics: 1.75761e-12, 8.04784e-13 unit (2 suppliers, which the file names only by identifier); sum of these 2.56239e-12 unit
- chemical, inorganic: 5.25397e-7 kg
- chemical, organic: 1.65246e-5 kg
- chlorine, gaseous: 9.26102e-5 kg
- chlorine, liquid: 6.09913e-8, 0.000290582 kg (2 suppliers, which the file names only by identifier); sum of these 0.000290643 kg
- chloromethyl methyl ether: 4.61027e-12 kg
- chromium oxide, flakes: 2.81497e-8 kg
- chromium steel pipe: 1.00639e-5 kg
- citric acid: 9.22585e-5 kg
- clay: 5.61639e-10, 3.65896e-6 kg (2 suppliers, which the file names only by identifier); sum of these 3.65952e-6 kg
- compressed air, 600 kPa gauge: 4.70446e-5 m3
- concrete, 30MPa: 5.16476e-10 m3
- copper scrap, sorted, pressed: -1.04908e-5 kg
- copper, cathode: 0.000410669 kg
- dichloropropene: -8.95216e-6 kg
- diesel: 1.43826e-10 kg
- diesel, burned in building machine: 8.62565e-7 MJ
- diesel, burned in diesel-electric generating set, 10MW: 1.73585e-5 MJ
- diethylene glycol: 6.9472e-7 kg
- drawing of pipe, steel: 1.00639e-5 kg
- electricity, low voltage: 1.53401e-7, 3.04005e-7, 2.92029e-6, 5.20937e-8, 7.36694e-7, 7.61637e-8, 9.47345e-9, 2.13039e-7, 9.25489e-7 kWh (9 suppliers, which the file names only by identifier); sum of these 5.39065e-6 kWh
- electricity, medium voltage: 1.37401e-7, 1.85526e-7, 1.35513e-7, 2.66821e-7, 5.5697e-8, 3.81395e-7, 4.89824e-7, 3.26235e-6, 3.64583e-8, 1.01565e-8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 kWh (97 suppliers, which the file names only by identifier); sum of these 0.00717147 kWh
- esters of versatic acid: 5.99895e-7, 1.21471e-6 kg (2 suppliers, which the file names only by identifier); sum of these 1.81461e-6 kg
- ethoxylated alcohol (AE7): 1.8826e-7, 8.93694e-7 kg (2 suppliers, which the file names only by identifier); sum of these 1.08195e-6 kg
- ethylene: 0.000679989 kg
- ethylene dichloride: 3.02817e-5 kg
- ethylene glycol: 5.65026e-5 kg
- extrusion, plastic film: 1.81785e-11 kg
- extrusion, plastic pipes: 1.38667e-10 kg
- fatty alcohol: 5.7501e-6 kg
- fly ash and scrubber sludge: -7.61573e-8, -6.43405e-6, -2.53795e-6 kg (3 suppliers, which the file names only by identifier); sum of these -9.04816e-6 kg
- frit, for ceramic tile: 5.30962e-9 kg
- glycerine: 1.82672e-10, 1.03284e-9 kg (2 suppliers, which the file names only by identifier); sum of these 1.21551e-9 kg
- hazardous waste, for incineration: -2.65456e-5, -1.51466e-5, -3.95922e-7 kg (3 suppliers, which the file names only by identifier); sum of these -4.20881e-5 kg
- hazardous waste, for underground deposit: -6.98617e-6, -4.49997e-7 kg (2 suppliers, which the file names only by identifier); sum of these -7.43617e-6 kg
- heat and power co-generation unit, organic Rankine cycle, 1000kW electrical: 3.68912e-11 unit
- heat, central or small-scale, natural gas: 2.50725e-13, 2.40301e-6 MJ (2 suppliers, which the file names only by identifier); sum of these 2.40301e-6 MJ
- heat, central or small-scale, other than natural gas: 1.10674e-8 MJ
- heat, district or industrial, natural gas: 0.00146959, 0.0104549, 0.000147947, 5.16254e-11 MJ (4 suppliers, which the file names only by identifier); sum of these 0.0120725 MJ
- heat, district or industrial, other than natural gas: 0.00122496 MJ
- heat, from steam, in chemical industry: 0.00030527 MJ
- hydrochloric acid, without water, in 30% solution state: 8.02721e-5, 0.000307776 kg (2 suppliers, which the file names only by identifier); sum of these 0.000388048 kg
- hydrogen, liquid: 9.09117e-8 kg
- industrial furnace, 1MW, oil: 4.76967e-9 unit
- industrial furnace, natural gas: 3.17774e-9 unit
- inert waste: -2.01489e-11, -4.43393e-8, -1.81465e-5 kg (3 suppliers, which the file names only by identifier); sum of these -1.81908e-5 kg
- inert waste, for final disposal: -4.17037e-6, -0.00041265 kg (2 suppliers, which the file names only by identifier); sum of these -0.00041682 kg
- isopropanol: 2.25869e-5, 2.32928e-5 kg (2 suppliers, which the file names only by identifier); sum of these 4.58797e-5 kg
- kaolin: 8.5877e-5 kg
- kerosene: 1.22882e-7, 2.07857e-5, 7.36311e-7, 5.85904e-7, 2.33599e-6, 1.56026e-7, 3.02384e-7, 2.0014e-7 kg (8 suppliers, which the file names only by identifier); sum of these 2.52254e-5 kg
- lime, packed: 4.78205e-10, 1.87826e-8, 3.75542e-8 kg (3 suppliers, which the file names only by identifier); sum of these 5.6815e-8 kg
- low level radioactive waste: -5.03865e-9 m3
- lubricating oil: 2.02737e-5, 4.27073e-6 kg (2 suppliers, which the file names only by identifier); sum of these 2.45444e-5 kg
- magnesium sulfate: 2.30163e-7 kg
- manganese: 5.0741e-8 kg
- metal working factory: 1.83276e-13 unit
- metal working, average for aluminium product manufacturing: 3.33675e-8 kg
- metal working, average for steel product manufacturing: 3.3197e-10 kg
- methyl ethyl ketone: 5.37048e-8, 2.02656e-8 kg (2 suppliers, which the file names only by identifier); sum of these 7.39705e-8 kg
- municipal solid waste: -8.0691e-10, -5.10766e-8, -2.90558e-10, -5.70679e-7, -2.03321e-10 kg (5 suppliers, which the file names only by identifier); sum of these -6.23056e-7 kg
- natural gas processing plant: 9.46033e-18 unit
- natural gas, high pressure: 1.47584e-7, 6.22957e-8, 3.56785e-7, 1.0588e-7, 5.98972e-6, 6.12197e-7, 2.51618e-6, 2.4011e-5, 6.68263e-8, 1.97195e-9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 m3 (27 suppliers, which the file names only by identifier); sum of these 8.2897e-5 m3
- natural gas, unprocessed, at extraction: 0.000193675 m3
- nitric acid, without water, in 50% solution state: 1.26298e-7, 1.64304e-6, 1.87659e-7, 4.66674e-7, 6.06895e-7, 2.23605e-7, 7.69059e-7, 2.02749e-7, 1.86965e-7 kg (9 suppliers, which the file names only by identifier); sum of these 4.41295e-6 kg
- nitrogen, liquid: 0.000184801, 9.13553e-5 kg (2 suppliers, which the file names only by identifier); sum of these 0.000276156 kg
- non-ferrous metal smelter: 1.33621e-16 unit
- oxygen, liquid: 2.41519e-5, 1.60373e-7 kg (2 suppliers, which the file names only by identifier); sum of these 2.43122e-5 kg
- packaging box factory: 7.98681e-14 unit
- paper, woodcontaining, lightweight coated: 7.87592e-9 kg
- phosphoric acid, fertiliser grade, without water, in 70% solution state: 0.00270079 kg
- phosphoric acid, industrial grade, without water, in 85% solution state: 4.62675e-9 kg
- polyethylene terephthalate, granulate, amorphous: 5.07707e-6 kg
- polyethylene, high density, granulate: 1.2543e-8 kg
- polymer foaming: 2.07377e-7 kg
- polypropylene, granulate: 1.81785e-11 kg
- polystyrene, general purpose: 6.48319e-12 kg
- propane, burned in building machine: 4.40508e-5 MJ
- propylene: 5.4916e-5 kg
- propylene glycol, liquid: 5.37011e-7, 2.65207e-7 kg (2 suppliers, which the file names only by identifier); sum of these 8.02219e-7 kg
- purified terephthalic acid: 0.000145542 kg
- quicklime, milled, loose: 0.000285966 kg
- quicklime, milled, packed: 0.000156828 kg
- rare earth carbonate concentrate: 0.000184155 kg
- refinery sludge: -2.34662e-8, -2.26226e-7, -1.07373e-9 kg (3 suppliers, which the file names only by identifier); sum of these -2.50766e-7 kg
- rolling mill: 2.48941e-14 unit
- sand: 3.61979e-9, 1.87923e-11, 4.33406e-11, 2.35561e-7 kg (4 suppliers, which the file names only by identifier); sum of these 2.39243e-7 kg
- scrap steel: -3.55347e-9, -8.71029e-6, -2.80471e-6 kg (3 suppliers, which the file names only by identifier); sum of these -1.15186e-5 kg
- sewage sludge, dried: -8.69197e-8 kg
- shale: 2.16104e-5 kg
- sheet rolling, aluminium: 1.18052e-8, 0.0002332 kg (2 suppliers, which the file names only by identifier); sum of these 0.000233212 kg
- sheet rolling, chromium steel: 3.24362e-12, 1.69699e-8 kg (2 suppliers, which the file names only by identifier); sum of these 1.69732e-8 kg
- sheet rolling, copper: 0.000400166 kg
- sheet rolling, steel: 1.43876e-6 kg
- silica sand: 0.00011152 kg
- silicon carbide: 2.81377e-6 kg
- sludge from steel rolling: -2.69178e-8 kg
- soap: 7.92911e-9 kg
- soda ash, dense: 3.36265e-5 kg
- soda ash, light: 7.16097e-5 kg
- sodium hydrosulfide: 8.06153e-7 kg
- sodium hydroxide, without water, in 50% solution state: 0.000602104 kg
- sodium nitrite: 2.14995e-8, 1.05893e-8 kg (2 suppliers, which the file names only by identifier); sum of these 3.20888e-8 kg
- solvent, organic: 2.64625e-5 kg
- spent antifreezer liquid: -9.70044e-11 kg
- spent solvent mixture: -0.000595716, -6.05192e-6, -0.000242756 kg (3 suppliers, which the file names only by identifier); sum of these -0.000844525 kg
- steel, chromium steel 18/8: 1.72842e-8 kg
- steel, low-alloyed: 5.19133e-6 kg
- steel, low-alloyed, hot rolled: 3.65369e-7 kg
- stone wool: 3.32021e-9 kg
- sulfidic tailings, generic: -0.000605775 kg
- sulfuric acid: 0.00012463, 0.000356757 kg (2 suppliers, which the file names only by identifier); sum of these 0.000481387 kg
- tap water: 4.62767e-5, 0.00398847, 8.16957e-5, 0.0340813, 1.5831e-9, 0.000295141, 0.0456421, 5.35915e-5, 0.000410662 kg (9 suppliers, which the file names only by identifier); sum of these 0.0845993 kg
- tetraethyl orthosilicate: 7.1085e-5 kg
- tetrafluoroethylene: 1.38667e-10 kg
- tissue paper: 2.76751e-10 kg
- titanium dioxide: 7.74192e-7, 1.54838e-6 kg (2 suppliers, which the file names only by identifier); sum of these 2.32258e-6 kg
- titanium tetrachloride: 1.67268e-8 kg
- trichloromethane: 5.64278e-12 kg
- trimethylamine: 3.38567e-12 kg
- tungsten concentrate: 2.47867e-5 kg
- vinyl chloride: 1.98427e-6 kg
- waste concrete: -1.13625e-6 kg
- waste emulsion paint: -2.70065e-17, -9.12787e-13, -8.60432e-14 kg (3 suppliers, which the file names only by identifier); sum of these -9.98858e-13 kg
- waste emulsion paint, separated: -4.48306e-8 kg
- waste graphical paper: -8.65071e-13, -5.18623e-14, -8.77357e-13, -3.58869e-13, -2.75333e-13, -4.56642e-13, -1.73585e-13, -1.05891e-12, -1.77337e-14, -5.79895e-14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 kg (42 suppliers, which the file names only by identifier); sum of these -2.76751e-10 kg
- waste mineral oil: -4.83647e-7, -5.11535e-5, -1.95365e-5 kg (3 suppliers, which the file names only by identifier); sum of these -7.11736e-5 kg
- waste paint on metal: -2.73388e-7, -2.3206e-9 kg (2 suppliers, which the file names only by identifier); sum of these -2.75708e-7 kg
- waste paperboard: -4.54317e-8 kg
- waste plastic, mixture: -2.96098e-7, -1.89444e-8, -3.79242e-9, -1.49624e-9, -5.08271e-10, -1.85714e-9, -3.39652e-9, -2.06466e-9, -2.36145e-9, -1.72964e-8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 kg (44 suppliers, which the file names only by identifier); sum of these -3.89106e-6 kg
- waste polyethylene: -1.55311e-11, -9.93683e-13, -7.13502e-14, -7.92604e-15, -5.18238e-14, -2.01303e-13, -3.80957e-14, -1.98922e-13, -7.12519e-13, -2.25288e-12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 kg (42 suppliers, which the file names only by identifier); sum of these -1.38667e-10 kg
- waste polypropylene: -2.27001e-14, -3.60898e-15, -9.60612e-15, -2.74892e-13, -2.63915e-15, -4.01919e-14, -1.30267e-13, -3.90336e-14, -4.85225e-14, -1.03906e-15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 kg (42 suppliers, which the file names only by identifier); sum of these -1.81785e-11 kg
- waste polystyrene: -3.12154e-13 kg
- waste textile, soiled: -3.28831e-12, -4.92176e-14 kg (2 suppliers, which the file names only by identifier); sum of these -3.33753e-12 kg
- waste wood, untreated: -5.09734e-15, -4.67701e-14, -6.97203e-14, -7.44956e-12, -2.95842e-14, -8.86166e-13, -1.95823e-13, -5.61513e-13 kg (8 suppliers, which the file names only by identifier); sum of these -9.24423e-12 kg
- waste x-ray film: -5.07707e-6 kg
- wastewater from ammonium paratungstate production: -3.61142e-7, -7.05897e-8 m3 (2 suppliers, which the file names only by identifier); sum of these -4.31732e-7 m3
- wastewater from vegetable oil refinery: -4.06642e-5 m3
- wastewater, average: -2.49535e-7, -9.67643e-10, -1.80581e-8, -3.67099e-5, -9.92919e-6 m3 (5 suppliers, which the file names only by identifier); sum of these -4.69077e-5 m3
- wastewater, unpolluted: -2.72514e-5 m3
- water, completely softened: 0.000140435 kg
- water, deionised: 1.0476e-5, 0.00287749, 0.000111653 kg (3 suppliers, which the file names only by identifier); sum of these 0.00299962 kg
- wax, lost-wax casting: 3.8621e-5 kg
- wire drawing, copper: 4.26952e-7 kg
- wire drawing, steel: 1.18052e-8 kg
- zircon: 2.39902e-5 kg

## Inputs from nature
- Water, cooling, unspecified natural origin [natural resource, in water]: 0.000358138 m3
- Water, lake [natural resource, in water]: 5.60886e-8 m3
- Water, river [natural resource, in water]: 1.90966e-7 m3
- Water, unspecified natural origin [natural resource, in water]: 7.36416e-6 m3
- Water, well, in ground [natural resource, in water]: 1.18508e-5 m3

## Emissions to nature
- Acetaldehyde [air, unspecified]: 2.15243e-9 kg
- Ammonia [air, non-urban air or from high stacks]: 1.91566e-6 kg
- Ammonia [air, unspecified]: 7.14866e-10 kg
- Benzene [air, unspecified]: 1.08301e-11 kg
- Carbon dioxide, fossil [air, non-urban air or from high stacks]: 0.0003815 kg
- Carbon dioxide, fossil [air, unspecified]: 7.76507e-5 kg
- Carbon monoxide, fossil [air, unspecified]: 8.6702e-8 kg
- Chlorine [air, non-urban air or from high stacks]: 2.5029e-10 kg
- Chlorine [air, unspecified]: 1.47174e-10 kg
- Chloroethylene [air, unspecified]: 3.83423e-9 kg
- Chloroform [air, unspecified]: 4.06378e-10 kg
- Chromium III [air, unspecified]: 2.87919e-12 kg
- Dinitrogen monoxide [air, unspecified]: 1.87843e-9 kg
- Dioxins, measured as 2,3,7,8-tetrachlorodibenzo-p-dioxin [air, unspecified]: 3.59291e-18 kg
- Ethane, 1,2-dichloro- [air, unspecified]: 1.28618e-8 kg
- Ethylene [air, unspecified]: 3.97297e-7 kg
- Helium [air, unspecified]: 5.79676e-10 kg
- Hydrocarbons, aliphatic, alkanes, unspecified [air, non-urban air or from high stacks]: 2.7532e-9 kg
- Hydrochloric acid [air, non-urban air or from high stacks]: 1.62689e-9 kg
- Hydrochloric acid [air, unspecified]: 1.47477e-9 kg
- Hydrogen [air, unspecified]: 1.22983e-9 kg
- Hydrogen sulfide [air, non-urban air or from high stacks]: 5.45696e-8 kg
- Methane, fossil [air, non-urban air or from high stacks]: 3.9378e-10 kg
- Methane, fossil [air, unspecified]: 3.03566e-9 kg
- Methane, tetrachloro-, R-10 [air, unspecified]: 2.15864e-10 kg
- Monochloroethane [air, unspecified]: 3.39372e-10 kg
- NMVOC, non-methane volatile organic compounds [air, non-urban air or from high stacks]: 1.61354e-9 kg
- NMVOC, non-methane volatile organic compounds [air, unspecified]: 4.30976e-7 kg
- Nitrogen [air, unspecified]: 0.000235527 kg
- Nitrogen oxides [air, non-urban air or from high stacks]: 2.7181e-7 kg
- Nitrogen oxides [air, unspecified]: 4.78117e-8 kg
- Particulate Matter, < 2.5 um [air, unspecified]: 1.18924e-11 kg
- Particulate Matter, > 10 um [air, non-urban air or from high stacks]: 1.11379e-8 kg
- Particulate Matter, > 10 um [air, unspecified]: 2.62484e-9 kg
- Particulate Matter, > 2.5 um and < 10um [air, unspecified]: 2.3891e-9 kg
- Propanol [air, urban air close to ground]: 1.72598e-5 kg
- Propene [air, unspecified]: 6.9506e-9 kg
- Sulfur dioxide [air, non-urban air or from high stacks]: 1.87831e-9 kg
- Sulfur dioxide [air, unspecified]: 3.47062e-9 kg
- Sulfur hexafluoride [air, unspecified]: 4.72894e-13 kg
- Trichloroethylene [air, unspecified]: 1.34886e-10 kg
- Water [air, unspecified]: 0.000136596 m3
- Water [air, urban air close to ground]: 4.54059e-6 m3
- Zinc II [air, unspecified]: 2.01375e-12 kg
- AOX, Adsorbable Organic Halogen [water, surface water]: 4.5819e-8 kg
- AOX, Adsorbable Organic Halogen [water, unspecified]: 1.36354e-10 kg
- Aluminium III [water, unspecified]: 3.27895e-10 kg
- Ammonium [water, unspecified]: 4.75956e-10 kg
- Antimony ion [water, unspecified]: 1.22224e-10 kg
- Arsenic ion [water, unspecified]: 6.28647e-13 kg
- BOD5, Biological Oxygen Demand [water, surface water]: 1.06911e-6 kg
- BOD5, Biological Oxygen Demand [water, unspecified]: 2.84014e-7 kg
- Benzene, hexachloro- [water, unspecified]: 1.75144e-14 kg
- Benzene, pentachloro- [water, unspecified]: 2.87395e-14 kg
- COD, Chemical Oxygen Demand [water, surface water]: 1.06911e-6 kg
- COD, Chemical Oxygen Demand [water, unspecified]: 5.6802e-7 kg
- Cadmium II [water, unspecified]: 8.40777e-14 kg
- Chloride [water, unspecified]: 1.64708e-6 kg
- Chlorine [water, unspecified]: 1.48127e-6 kg
- Chloroethylene [water, unspecified]: 8.39205e-13 kg
- Chloroform [water, unspecified]: 2.25357e-12 kg
- Chromium III [water, unspecified]: 8.6884e-12 kg
- Chromium VI [water, unspecified]: 3.21743e-12 kg
- Copper ion [water, unspecified]: 3.88568e-11 kg
- DOC, Dissolved Organic Carbon [water, surface water]: 3.99926e-7 kg
- DOC, Dissolved Organic Carbon [water, unspecified]: 2.10392e-7 kg
- Dioxins, measured as 2,3,7,8-tetrachlorodibenzo-p-dioxin [water, unspecified]: 6.26231e-18 kg
- Ethane, 1,2-dichloro- [water, unspecified]: 1.87711e-11 kg
- Fluoride [water, unspecified]: 3.7071e-6 kg
- Lead II [water, unspecified]: 6.4331e-13 kg
- Mercury II [water, unspecified]: 1.17466e-14 kg
- Methane, tetrachloro-, R-10 [water, unspecified]: 1.38081e-12 kg
- Methanol [water, unspecified]: 9.65242e-13 kg
- Nickel II [water, unspecified]: 3.84632e-12 kg
- Nitrate [water, unspecified]: 2.35766e-10 kg
- Nitrogen [water, unspecified]: 3.709e-8 kg
- Nitrogen, organic bound [water, unspecified]: 3.4049e-9 kg
- Oils, unspecified [water, unspecified]: 3.95415e-9 kg
- Phenol [water, unspecified]: 1.13572e-14 kg
- Phosphorus [water, unspecified]: 1.45606e-9 kg
- Sodium I [water, unspecified]: 4.8123e-6 kg
- Sulfate [water, unspecified]: 1.67371e-7 kg
- Sulfur [water, unspecified]: 5.76264e-16 kg
- Suspended solids, unspecified [water, unspecified]: 2.64988e-7 kg
- TOC, Total Organic Carbon [water, surface water]: 3.99926e-7 kg
- TOC, Total Organic Carbon [water, unspecified]: 2.10392e-7 kg
- Triethylene glycol [water, unspecified]: 2.90533e-12 kg
- Water [water, surface water]: 1.60874e-7 m3
- Water [water, unspecified]: 0.000208582 m3
- Zinc II [water, unspecified]: 2.0766e-10 kg

## Sampling procedure
The 2 Swiss HWI plants, used as the inventory reference technology mix, have a total annual capacity of 53'000 tons of hazardous waste. This corresponds to 39% of the Swiss total installed capacity in 2000. Swiss average plants size is 20'000 t/a.

## Extrapolations
Available waste composition data. Transfer coefficients from one modern HWI completed with data from MSWI. Waste-specific auxiliary material consumption adapted from MSWI.
