# treatment of sewage sludge, 97% water, WWT, WW from potato starch production, landfarming

Dataset: EcoSpold 2, unit process
Geography: RoW
Time period: 2000-01-01 to 2022-12-31
Technology level: current
Classification: ISIC rev.4 ecoinvent: 3821:Treatment and disposal of non-hazardous waste
Scenario: Business-as-Usual
System model: Allocation at the point of substitution
Generated by: Nikolia Stoikou
Database: ecoinvent
isCopyrightProtected: true

## General comment
The process represents the treatment of a waste (sewage sludge) that is exclusively produced from another waste treatment. Recommended use of this dataset: to be used within the specific chain of treatments for 'wastewater from potato starch production'. Share of biogenic carbon in the sludge: 98.95%.

## Included activities start
The activity starts with the waste being available for landfarming. Collection and transportation of the waste to this process is not included.

## Included activities end
The activity ends with the waste being treated and waste-specific emissions from the landfarming process are released to the environment (air, water and soil). The activity is considering local fate of emissions and the initial specific wastewater composition (generating the sewage sludge). Further, it includes provision of fertiliser functions for N, P, K, if present in the sludge.

## Geography
The site has mean annual temperature (MAT) of 16.743579766537 degC, mean annual precipitation (MAP) of 1250.84108527132 mm/year, mean annual actual evaporation (EAT) of 460.58904958214 mm/year. Climate will influence the local fate emissions based on the elemental composition of the sludge as well as water evaporation to air (= consumptive water use).
References: UN data, 2020. Precipitation, Environment Statistics Database, United Nations Statistics Division Available at: http://data.un.org/Data.aspx?q=precipitation&d=ENV&f=variableID%3a6;
World Bank, 2022. Surface area (sq.km), World Bank Group Available at: https://data.worldbank.org/indicator/AG.SRF.TOTL.K2;
Doka G.,2021. A model for composition-specific life cycle inventories of regionalised wastewater fates, Zurich, Switzerland. http://www.doka.ch/publications.htm

## Technology
Landfarming is the process of spreading a substrate on agricultural soil. Sewage sludge is generated in the wastewater treatment of wastewater from potato starch production. Spreading of liquid sewage sludge (97w% water content) on agricultural fields with mobile vacuum tanker.

## Reference product
- organic nitrogen fertiliser, as N: 1 kg; By-product classification allocatable product; CPC 34659: Fertilizers n.e.c.; lognormal variance with pedigree 0.080487, pedigree (1,1,1,1,1)
  gross fertilizer function provided from sewage sludge spreading on agricultural fields.
  Uncertainty: Uncertainty calculated from upstream wastewater technosphere fate uncertainty, wastewater composition uncertainty, and treatment model uncertainty
  production volume 168817 kg
    Calculated in proportion to wastewater reference product.
  property nitrogen content 1
    Nitrogen content (on a dry matter basis) of organic nitrogen fertiliser, as N is calculated from the molecular formula of the substance (Nitrogen).
  property price 0.473 EUR2005
    Set equal to the price of the corresponding inorganic fertiliser
  properties: carbon allocation 0 kg, carbon content 0, carbon content, fossil 0, carbon content, non-fossil 0, dry mass 1 kg, water content 0, water in wet mass 0 kg, wet mass 1 kg

## Inputs from technosphere
- EDTA, ethylenediaminetetraacetic acid: 3.70504e-5 kg
- ammonia, anhydrous, liquid: 1.87702e-9, 1.96732e-10, 4.15407e-9, 1.59186e-10, 7.23026e-9, 9.66936e-10, 8.79465e-10, 2.08056e-8, 6.21527e-10 kg (9 suppliers, which the file names only by identifier); sum of these 3.68908e-8 kg
- biowaste: -0.000162938, -1.43505e-6 kg (2 suppliers, which the file names only by identifier); sum of these -0.000164374 kg
- chemical factory, organics: 6.4872e-11 unit
- chemical, inorganic: 0.00385877 kg
- chemical, organic: 0.00523306 kg
- cow milk: 0.000985877, 0.544088 kg (2 suppliers, which the file names only by identifier); sum of these 0.545074 kg
- cream, from cow milk: 0.0303578 kg
- dairy: 4.99762e-6 m3
- electricity, medium voltage: 0.02802, 0.00310985, 0.00881819, 0.000226901, 0.00691626, 9.26113e-5, 0.000472541, 0.000738002, 0.0285331, 0.00211511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 kWh (11 suppliers, which the file names only by identifier); sum of these 0.0806033 kWh
- evaporation of milk: 9.39625e-5, 0.0216814 kg (2 suppliers, which the file names only by identifier); sum of these 0.0217754 kg
- heat, district or industrial, natural gas: 0.0519202, 0.146685, 0.140472, 0.000833784 MJ (4 suppliers, which the file names only by identifier); sum of these 0.339911 MJ
- heat, district or industrial, other than natural gas: 0.00159697 MJ
- hydrogen peroxide, without water, in 50% solution state: 2.74869e-5, 5.76e-6 kg (2 suppliers, which the file names only by identifier); sum of these 3.32469e-5 kg
- maize starch: 0.00490192 kg
- municipal solid waste: -3.17111e-6, -5.60755e-5, -3.43703e-7, -0.000675059, -2.4051e-7 kg (5 suppliers, which the file names only by identifier); sum of these -0.00073489 kg
- nitric acid, without water, in 50% solution state: 1.65624e-5, 0.000215464, 2.46091e-5, 6.11983e-5, 7.95865e-5, 2.9323e-5, 0.000100852, 2.65879e-5, 2.4518e-5, 0.000173646 kg (10 suppliers, which the file names only by identifier); sum of these 0.000752347 kg
- potassium hydroxide: 3.23235e-5 kg
- propylene glycol, liquid: 8.6911e-7, 4.26456e-7 kg (2 suppliers, which the file names only by identifier); sum of these 1.29557e-6 kg
- refrigerant R134a: 1.44903e-9 kg
- skimmed milk, from cow milk: 0.00456036 kg
- soda ash, light: 6.27436e-7 kg
- sodium hydroxide, without water, in 50% solution state: 0.000929794 kg
- sodium hypochlorite, without water, in 15% solution state: 1.66441e-8, 7.94262e-8 kg (2 suppliers, which the file names only by identifier); sum of these 9.60703e-8 kg
- spray-drying of milk: 6.5488e-6, 0.00151111 kg (2 suppliers, which the file names only by identifier); sum of these 0.00151766 kg
- strawberry: 0.00966288 kg
- sugar, from sugar beet: 0.0104395 kg
- sugar, from sugarcane: 0.00587007 kg
- tap water: 1.61252e-5, 0.412992, 0.00017446, 6.91861e-6, 0.00149079, 1.29098e-5, 0.00199644, 4.53854e-6, 3.4778e-5 kg (9 suppliers, which the file names only by identifier); sum of these 0.416729 kg
- transport, freight, lorry, unspecified: 9.85877e-5 metric ton*km
- wastewater from potato starch production: -7.3404e-6, -0.00152255 m3 (2 suppliers, which the file names only by identifier); sum of these -0.00152989 m3
- water, deionised: 1.99437e-7, 5.5403e-5, 0.000180876 kg (3 suppliers, which the file names only by identifier); sum of these 0.000236479 kg
- wheat grain: 0.000452421, 2.39702e-6 kg (2 suppliers, which the file names only by identifier); sum of these 0.000454818 kg
- whey: 0.00195917 kg

## Inputs from nature
- Water, unspecified natural origin [natural resource, in water]: 0.001078 m3
- Water, well, in ground [natural resource, in water]: 8.8451e-5 m3

## Emissions to nature
- Ammonia [air, unspecified]: 3.68908e-8 kg
- Methane, chlorodifluoro-, HCFC-22 [air, unspecified]: 1.44903e-9 kg
- Water [air, unspecified]: 7.52165e-5 m3
