# gravel/sand quarry construction

Dataset: EcoSpold 2, unit process
Geography: RoW
Time period: 1997-01-01 to 2022-12-31
Technology level: current
Classification: EcoSpold01Categories: construction materials/additives
Classification: ISIC rev.4 ecoinvent: 4290:Construction of other civil engineering projects
Synonyms: pit; Grube
Tags: ConvertedDataset
Scenario: Business-as-Usual
System model: Allocation at the point of substitution
Share of production covered: 100 %
Generated by: Daniel Kellenberger (obsolete)
Published in: Kellenberger D. 2007
Database: ecoinvent
isCopyrightProtected: true

## General comment
Data are estimated based on an air-picture for one mine and sketches of the process. The average yearly production volume per unit (mine) is about 400'000 to 500'000 t/a and the life time is assumed to be 50 years
[This dataset was already contained in the ecoinvent database version 2. It was not individually updated during the transfer to ecoinvent version 3. Life Cycle Impact Assessment results may still have changed, as they are affected by changes in the supply chain, i.e. in other datasets. This dataset was generated following the ecoinvent quality guidelines for version 2. It may have been subject to central changes described in the ecoinvent version 3 change report (http://www.ecoinvent.org/database/ecoinvent-version-3/reports-of-changes/), and the results of the central updates were reviewed extensively. The changes added e.g. consistent water flows and other information throughout the database. The documentation of this dataset can be found in the ecoinvent reports of version 2, which are still available via the ecoinvent website. The change report linked above covers all central changes that were made during the conversion process.]

## Included activities end
includes the area of the infrastructure (buildings, paved roads, etc.) and the machines used for the gravel mining, does not include the area of the actual mine, which is included in mining

## Geography
The data are based on the investigation on 4 representative Swiss gravel pits; for some exchanges RER modules have been used as proxy

## Technology
average Swiss gravel/sand mine

## Reference product
- gravel/sand quarry infrastructure: 1 unit; By-product classification allocatable product; CPC 53269: Other constructions for manufacturing
  EcoSpold01Location=CH
  production volume 3.96633 unit
    This is a placeholder value that does not reflect real-world production volumes. This dataset does not currently require a real-world production volume to work in the database framework, and no actual data were collected yet. This has no negative effect on the results of the ecoinvent database.
  property price 929571 EUR2005
    Calculated based on inputs: The price of the product has been calculated as a sum of the values of the material and energy inputs for this product. This value is therefore a rough estimation. It may underestimate the real price since there are additional expenses when producing any product. These expences can include for example labour costs, treatment of waste materials and profit for the producer. Please consider carefully whether this level of data quality is acceptable for your application.
  properties: carbon allocation 0 kg, carbon content 0

## Inputs from technosphere
- building, hall, steel construction: 3000 m2; lognormal variance with pedigree 0.372, pedigree (3,5,5,5,1)
  EcoSpold01Location=CH
- building, multi-storey: 3120 m3; lognormal variance with pedigree 0.372, pedigree (3,5,5,5,1)
  EcoSpold01Location=RER
- industrial machine, heavy, unspecified: 340000 kg; lognormal variance with pedigree 0.372, pedigree (3,5,5,5,1)
  EcoSpold01Location=RER

## Inputs from nature
- Occupation, industrial area [natural resource, land]: 2.306e6 m2*year; lognormal variance with pedigree 0.1032, pedigree (2,3,5,5,1)
- Occupation, traffic area, road network [natural resource, land]: 734000 m2*year; lognormal variance with pedigree 0.1032, pedigree (2,3,5,5,1)
- Transformation, from unspecified [natural resource, land]: 60900 m2; lognormal variance with pedigree 0.1832, pedigree (2,3,5,5,1)
- Transformation, to industrial area [natural resource, land]: 46220 m2; lognormal variance with pedigree 0.1832, pedigree (2,3,5,5,1)
- Transformation, to traffic area, road network [natural resource, land]: 14700 m2; lognormal variance with pedigree 0.1832, pedigree (2,3,5,5,1)

## Sampling procedure
Measured data of four Swiss plants

## Extrapolations
See geography This dataset has been copied from an original dataset covering the geography CH. The uncertainty has been adjusted accordingly.

## Review by Roberto Dones 2003-07-04
Passed
