# granulated blast furnace slag production

Dataset: EcoSpold 2, unit process
Geography: BR
Time period: 2015-07-26 to 2022-07-26
Technology level: current
Classification: ISIC rev.4 ecoinvent: 2395:Manufacture of articles of concrete, cement and plaster
Synonyms: GBFS
Scenario: Business-as-Usual
System model: Allocation at the point of substitution
Share of production covered: 23 %
Generated by: Marcella Ruschi Mendes Saade
Published in: Silva, F. B. 2017
Database: ecoinvent
isCopyrightProtected: true

## General comment
This dataset represents the intermediate treatment of raw blast furnace slag, producing an output of granulated blast furnace slag (GBFS). GBFS resembles a natural sand grain, with a more angular form. It has a glass content of over 95% and presents excellent hydraulic properties. The GBFS usually goes through a subsequent grinding process, generating a supplementary cementitious material called ground granulated blast furnace slag (GGBFS). In Brazil, around 70% of the blast furnace slag used in cement making is grinded jointly with clinker, after the granulation process. Therefore, this dataset focuses exclusively in the blast furnace slag granulation process, which happens in the steelmaking company. This dataset is mainly based on primary data provided by one Brazilian steelmaking plant, representing an average condition of GBFS production in Brazil. Water and electricity consumption come from internal company reports, and granulated blast furnace slag daily production is measured by scales within the plant. Particulate emission data was extrapolated by Marceau and VanGeem (2003), exclusively for their granulation process. Other emissions data listed on that publication were not considered here either because they were related to drying or grinding, or because consulted Brazilian experts claimed they didn't make sense in the local granulation process. According to the company which provided primary granulation data, there is no mass loss within the granulation process.

## Included activities start
From the generation of blast furnace slag from pig iron production, at the steelmaking plant.

## Included activities end
This activity ends with the granulation of blast furnace slag. It includes the water and electricity consumed for the granulation process, and emissions that arise from it. Infrastructure, machinery and administration activities not included

## Geography
Dataset based on primary data provided by one Brazilian steelmaking company that represents average conditions

## Technology
Granulation is performed using pressurized cold water jets. Granulated slag is subsequently dried in filters within the storage silo.

## Time period
LCI based on primary company data from January to June of 2017. The start of period date was set to 2015 since the granulation process's technology as modeled has been available for some time already.

## Reference product
- granulated blast furnace slag: 1 kg; name GBFS; By-product classification allocatable product; CPC 39310: Slag, dross, scalings and other waste from the manufacture of iron or steel
  production volume 7.24e9 kg
    Production volume published in the 2016 Cement Industry Energy and CO2 performance - Getting the numbers right (GNR) for Brazil. Data referred to the year of 2014. Available at: http://www.wbcsdcement.org/pdf/GNR%20dox.pdf
  property carbon content, fossil 0; name GBFS_C_content_fossil
    fossil carbon content on a dry matter basis
  property carbon content, non-fossil 0; name GBFS_C_content_non_fossil
    biogene carbon content on a dry matter basis
  property price 0.0615 EUR2005
    2005 import and export prices (total trades (USD) divided by total weight (kg) in China, India, USA, Japan, Russia and Europe, major producers and consumers (http://www.cementchina.net/freport/showfre.asp?id=749) from UN Commodity Trade Statistics Database (http://data.un.org/Explorer.aspxDatabase [Accessed 2 July 2010]). Commodity: Cement (portland, aluminious, slag or hydraulic)
  property water content 0; name GBFS_water_content
  property water in wet mass 0 kg; name GBFS_WWM
  properties: carbon allocation 0 kg, carbon content 0, dry mass 1 kg, wet mass 1 kg

## Inputs from technosphere
- blast furnace: 3.25586e-12 unit
- blast furnace dust: -0.000205552, -0.00209008 kg (2 suppliers, which the file names only by identifier); sum of these -0.00229563 kg
- blast furnace gas: -0.0691897 MJ
- blast furnace slag: -0.0691943 kg
- blast furnace sludge: -4.51725e-5, -2.64211e-5, -0.000727975, -0.000255077 kg (4 suppliers, which the file names only by identifier); sum of these -0.00105465 kg
- coke: 2.42718 MJ
- diesel: 9.55397e-8 kg
- dolomite: 4.7153e-5 kg
- electricity, medium voltage: 7.01463e-7 kWh
- hard coal: 2.55077e-11, 0.00510551, 0.00231502, 0.00306567, 0.0163839, 0.00236242, 0.00345142, 0.00100464, 0.000549337 kg (9 suppliers, which the file names only by identifier); sum of these 0.0342379 kg
- heat, district or industrial, other than natural gas: 0.000900742 MJ
- inert waste, for final disposal: -2.71908e-5, -0.00027648 kg (2 suppliers, which the file names only by identifier); sum of these -0.000303671 kg
- iron ore concentrate: 0.0342379, 0.00484487 kg (2 suppliers, which the file names only by identifier); sum of these 0.0390828 kg
- iron pellet: 0.00631316, 0.0913012 kg (2 suppliers, which the file names only by identifier); sum of these 0.0976143 kg
- iron sinter: 0.0146669, 0.218206, 0.0214597 kg (3 suppliers, which the file names only by identifier); sum of these 0.254333 kg
- limestone, unprocessed: 4.2566e-5, 0.000204378, 0.00207815 kg (3 suppliers, which the file names only by identifier); sum of these 0.0023251 kg
- natural gas, high pressure: 5.26882e-6, 2.22398e-6, 1.27374e-5, 3.77997e-6, 0.000213836, 2.18557e-5, 2.38573e-6, 7.03994e-8, 8.47136e-6, 8.89594e-6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 m3 (26 suppliers, which the file names only by identifier); sum of these 0.000702317 m3
- nitrogen, liquid: 0.000498995 kg
- oxygen, liquid: 0.000852915 kg
- refractory, fireclay, packed: 0.000456506 kg
- sponge iron: 5.57982e-8 kg
- steam, in chemical industry: 0.00231164 kg
- wastewater from pig iron production: -3.46957e-5, -6.09481e-8, -2.42517e-6 m3 (3 suppliers, which the file names only by identifier); sum of these -3.71818e-5 m3

## Inputs from nature
- Water, cooling, unspecified natural origin [natural resource, in water]: 0.000241258 m3
- Water, unspecified natural origin [natural resource, in ground]: 1.17705e-5 m3
- Water, unspecified natural origin [natural resource, in water]: 9.21166e-5 m3

## Emissions to nature
- Carbon dioxide, fossil [air, unspecified]: 0.197033 kg
- Carbon monoxide, fossil [air, unspecified]: 0.000327319 kg
- Dioxins, measured as 2,3,7,8-tetrachlorodibenzo-p-dioxin [air, unspecified]: 6.49462e-16 kg
- Hydrogen sulfide [air, unspecified]: 2.62388e-6 kg
- Lead II [air, unspecified]: 1.68859e-8 kg
- Manganese II [air, unspecified]: 1.81847e-8 kg
- Nickel II [air, unspecified]: 3.89662e-9 kg
- Nitrogen oxides [air, unspecified]: 1.94836e-5 kg
- Particulate Matter, < 2.5 um [air, unspecified]: 7.01402e-6 kg
- Particulate Matter, > 10 um [air, unspecified]: 3.89662e-7 kg
- Particulate Matter, > 2.5 um and < 10um [air, unspecified]: 3.89662e-7 kg
- Sulfur dioxide [air, unspecified]: 3.24731e-5 kg
- Water [air, unspecified]: 0.000114265 m3
- Water [water, unspecified]: 0.000221464 m3

## Sampling procedure
Collection of primary data from one Brazilian steelmaking plant.
The amount of the exchanges was calculated considering the average of the sample. No conversion to the geometric mean of the lognormal distribution was done, for consistency reasons with other ecoinvent datasets.

## Extrapolations
Data refers to one Brazilian steelmaking plant, extrapolated to the whole country's technology. Collected data were complemented by emissions data from the US Life Cycle Inventory of Slag Cement Manufacturing Process (available in Marceau and VanGeem, 2003)
