# electricity voltage transformation from medium to low voltage

Dataset: EcoSpold 2, unit process
Geography: BR-Northern grid
Time period: 2014-01-01 to 2022-12-31
Technology level: current
Classification: ISIC rev.4 ecoinvent: 3510:Electric power generation, transmission and distribution
Scenario: Business-as-Usual
System model: Allocation at the point of substitution
Generated by: Henrique Rogerio Antunes de Souza Junior
Published in: Suppen, N 2017
Database: ecoinvent
isCopyrightProtected: true

## General comment
This dataset represents the transformation of electricity voltage from medium to low voltage.
Definition of the voltage levels:
- High voltage level above 24 kV (large scale industry)
- Medium voltage level between 1 kV and 24 kV (medium to small scale industry, service sector
and public buildings)
- Low voltage level below 1 kV (Households)
The original ecoinvent dataset used as a basis was 'electricity voltage transformation from medium to low voltage, BR, 2012-2012' and it has been copied in '12/2017'
[This dataset is meant to replace the following datasets:
- electricity voltage transformation from medium to low voltage, BR, 2012 - 2012]

## Included activities start
This activity starts with the medium voltage electricity arriving at the transformer station.

## Included activities end
This activity ends with 1kWh of medium voltage electricity transformed to low voltage.

This dataset includes the losses during voltage transformation.

It doesn't include the transformer station itself as this is included in the dataset for the transmission network.

## Technology
Transformers are essential components of the electricity grid. They connect the different voltage levels.
Big power plants feed the electricity at a very high voltage to the electricity grid. Transformers between 600 MVA and 80 MVA can be found in substations, where the high transmission voltage is transformed to the medium distribution voltage. In an additional step the medium voltage is transformed to low voltage using transformers below 2.5 MVA. The small transformers below 2.5 MVA are allocated to the low voltage level, whereas all the other transformers are allocated to the medium voltage level.

## Parameters
- electricity transformation losses: 0 dimensionless
- total electricity losses within the country: 0 dimensionless

## Reference product
- electricity, low voltage: 1 kWh; By-product classification allocatable product; CPC 17100: Electrical energy
  production volume 3.89468e10 kWh
    This value is the total output after transformation (medium to low voltage).
    The calculation is made based on total electricity losses between net electricity available at the busbar and the use of electricity calculated based on the Anuário Estatístico de Energia Elétrica 2021 (page 75), (PD) (EMPRESA, 2016). These total losses over the whole chain are then allocated to the different voltage levels as well as transformation and transmission losses based on supplementary material information in Itten et al. 2014. For details please see the documentation available on ecoQuery.
    EMPRESA, D.P.E.E., 2021. Anuário Estatístico de Energia Elétrica 2021 ano base 2020. Rio de Janeiro: EPE.. Available: https://www.epe.gov.br/sites-pt/publicacoes-dados-abertos/publicacoes/PublicacoesArquivos/publicacao-160/topico-168/Anu%C3%A1rio_2021.pdf#page=1&zoom=auto,-248,653
    Treyer, Karin & Bauer, Christian. (2014). Life cycle inventories of electricity generation and power supply in version 3 of the ecoinvent database?Part II: Electricity markets. The International Journal of Life Cycle Assessment. 21. 10.1007/s11367-013-0694-x.
  property price 0.107 EUR2005
    Temporary price data. Calculated as 90% of purchasers price based on: IEA Key world energy statistics 2004 (www.iea.org/textbase/nppdf/free/2004/keyworld2004.pdf)
  properties: carbon allocation 0 kg, carbon content 0

## Inputs from technosphere
- electricity, medium voltage: 1.11247 kWh
  Calculated value/estimation.
  This value compensates for the losses during transformation on this electricity market. The calculation is made based on total electricity losses between net electricity available at the busbar and the use of electricity calculated based on the Matrizes Elétricas Estaduais: Ano Referência 2015 (page 4 - Northern), (PD) (MME, 2016). These total losses over the whole chain are then allocated to the different voltage levels as well as transformation and transmission losses based on supplementary material information in Itten et al. 2014. For details please see the documentation available on ecoQuery.
  equation: PD (MME, 2016) x Losses low voltage transformation (Treyer et. al., 2014; page 1262)
  PD = Perdas de Distribuição = BR Distribution Losses
  MME (2016). Matrizes Elétricas Estaduais: Ano Referência 2015. Edição de 23 de novembro de 2016. Ministério De Minas E Energia - MME. Secretaria De Planejamento E Desenvolvimento Energético. Núcleo De Estudos Estratégicos De Energia. Available in: <http://www.mme.gov.br/documents/10584/3580498/03+-+Matrizes+El%C3%A9tricas+Estaduais+2016+-+ano+ref.+2015+%28PDF%29/ddfaad8c-a436-4aa8-b619-f95dd2cf689c?version=1.0> Access in: 12/2017.
  Treyer, Karin & Bauer, Christian. (2014). Life cycle inventories of electricity generation and power supply in version 3 of the ecoinvent database?Part II: Electricity markets. The International Journal of Life Cycle Assessment. 21. 10.1007/s11367-013-0694-x.

## Extrapolations
Electricity losses data are based on EMPRESA 2021 data and on data from Treyer et al. (2014)

EMPRESA, D.P.E.E., 2021. Anuário Estatístico de Energia Elétrica 2021 ano base 2020. Rio de Janeiro: EPE.. Available: https://www.epe.gov.br/sites-pt/publicacoes-dados-abertos/publicacoes/PublicacoesArquivos/publicacao-160/topico-168/Anu%C3%A1rio_2021.pdf#page=1&zoom=auto,-248,653

Treyer, Karin & Bauer, Christian. (2014). Life cycle inventories of electricity generation and power supply in version 3 of the ecoinvent database?Part II: Electricity markets. The International Journal of Life Cycle Assessment. 21. 10.1007/s11367-013-0694-x.

## Review by Karin Treyer 2018-01-24
The loss values in this dataset need to be revised in a wholistic way over the whole market- transformation dataset chain. This will be done in an integrated way after accept of all affected datasets into the database.
