# electricity production, solar tower power plant, 20 MW

Dataset: EcoSpold 2, unit process
Geography: RoW
Time period: 2010-01-01 to 2022-01-01
Technology level: modern
Classification: ISIC rev.4 ecoinvent: 3510:Electric power generation, transmission and distribution
Tags: Concentrated Solar Power; CSP
Scenario: Business-as-Usual
System model: Allocation at the point of substitution
Generated by: Karin Treyer
Database: ecoinvent
isCopyrightProtected: true

## General comment
This activity represents the generation of high voltage electricity with a 20 MW concentrated solar power solar tower plant in Upington, South Africa. This requires a fully constructed solar tower plant and the required co-firing diesel fuel to run the plant.

## Included activities start
The activity starts with the solar tower and all units being operational. This activity does not include any maintenance activities or replacement of parts within the 30 years plant lifetime.

## Included activities end
This activity does not show any operation&maintenance activities directly as these are already included in the supplying activities (e.g. oil use and disposal for maintenance of the pumps).

## Geography
This dataset has been extrapolated from a dataset modelled for the location Upington, South Africa. Uncertainty has not been adjusted as it is assumed that the modelled 20 MW solar tower power plant would be very similar in other parts of the world.

## Technology
- 20 MW solar tower power plant
- Dataset modelled for the location "Upington, South Africa", Direct Normal Irradiance: 2719 kWh/m2a
- Air cooling
- collector field area: 215'520 m2
- thermal heat storage capacity: 440 MWhth
- hot and cold two stage nitrate salt thermal storage system
- steam mass flow rate: 37 kg/s

## Parameters
- electricity yield: 1.05794e8 kWh/year; name electricity_yield; lognormal variance with pedigree 0.0033, pedigree (3,2,1,1,2)
  Yearly electricity yield as calculated in Telsnig 2015 for the solar tower plant in Upington, South Africa, for the configuration with limited storage and a direct normal irradiance (DNI) of 2719 kWh/m2*y.
  Parasitic loads are calculated to be 11% of the gross electricity production.
- lifetime: 30 year; lognormal variance with pedigree 0.0117, pedigree (4,4,1,3,2)
  The assumed economic lifetime of the solar tower power plant is 30 years.

## Reference product
- electricity, high voltage: 1 kWh; By-product classification allocatable product; CPC 17100: Electrical energy; lognormal variance with pedigree 0.001, pedigree (1,1,1,1,1)
  Reference product for electricity production for a 20MW solar tower power plant.
  production volume 1.66849e7 kWh
    Literature value/extrapolated value. According to IEA statistics (OECD 2017), total gross electricity production with solar thermal plants on the world amounted to ca. 4850 GWh in 2012.
    According to NREL 2017, total installed capacity of solar thermal plants in Spain, United States and South Africa amounts to 4396 MW, out of which 3741 MW of parabolic trough type, 614 MW solar towers, and 40 MW Linear Fresnel reflector. No dataset to model the latter exists in ecoinvent, so that these 40 MW are neglected..
    The total electricity production (2012) is split according to these installed capacities (status beginning of 2017) as a first assumption. Further, it is assumed that the power plant own electricity use (losses from gross to net production) amounts to 11% (Telsnig 2015).
    OECD. 2017. OECD - Electricity and heat generation. OECD iLibrary, IEA Electricity Information Statistics. ISSN: 1683-4283 (online); DOI: 10.1787/elect-data-en
    Solar Paces. 2017. CSP Projects Around the World. Data on CSP projects compiled by NREL. National Renewable Energy Laboratory (NREL), United States, Accessed February 2017. <http://www.solarpaces.org/csp-technology/csp-projects-around-the-world>.
    Telsnig, Thomas. 2015. "Standortabhängige Analyse und Bewertung solarthermischer Kraftwerke am Beispiel Südafrikas." In.: Institut für Energiewirtschaft und Rationelle Energieanwendung IER, Universtität Stuttgart. Forschungsbericht. Band 123. ISSN 0938-1228.
  property price 0.0977 EUR2005
    Temporary price data. Calculated as 90% of purchasers price based on: 94% of the average price (to account for a 6% loss in transformation and transmission) for electricity for industrial consumersin 2005 (excluded taxes). From IEA.
  properties: carbon allocation 0 kg, carbon content 0

## Inputs from technosphere
- concentrated solar power plant, solar tower, 20 MW: 3.15078e-10 unit; = 1/(electricity_yield*lifetime); lognormal variance with pedigree 0.0197, pedigree (4,4,4,3,2)
  Infrastructure needed for the production of 1 kWh of electricity
- heat, district or industrial, natural gas: 0.402876 MJ; = (electricity_yield/(1-0.11)*0.0996)/electricity_yield*3.6
  Heat needed for backup firing per 1kWh of net electricity produced. For the system as modelled in Telsnig 2015 for the location Upington, a co-firing rate of 9.9% of total gross electricity production has been calculated. The parasitic losses amount to 11% of the gross electricity production.
  As many systems run on natural gas as backup power source, heat from natural gas is assumed in this dataset as an input.
  properties: heating value, net 1 MJ
- water, deionised: 0.000110765, 0.0998892 kg (2 suppliers, which the file names only by identifier); sum of these 0.1 kg; lognormal variance with pedigree 0.017225, pedigree (4,3,3,2,2)
  Water used for cleaning the mirrors.
  Various references indicate a water need for these cleaning activities between 0.04 and 0.12 l/kWh, with several references mentioning 0.09-0.1 l/kWh, so that a value of 0.1l/kWh was chosen for this dataset.
  Boukelia, T.E., Mecibah, M.S., Kumar, B.N., Reddy, K.S. 2015. Investigation of solar parabolic trough power plants with and without integrated TES (thermal energy storage) and FBS (guel backup system) using thermic oil and solar salt. Energy 88 (2015) 292-303
  Fernández-García, A., Alvarez-Rodrigo, L., Martínez-Arcos, L., Aguiar, R., Márquez-Payés, JM. 2014. Study of different cleaning methods for solar reflectors used in CSP plants. Energy procedia 49 (2014) 80-89
  Moreno Merino, L., Imbern Fernández, N., Durán Valsero, J.J., Aguilera, H. 2018. Journal of Environmental Management 206 (2018) 409-417.
  Raza, A., Higgo, A.R., Alobaidli, A., Zhang, T.J. 2016. Water recovery in a concentrated solar power plant. AIP Conference Proceedings 1734, 160014 (2016)
  System Advisor Model Version 2016.3.14 (SAM 2016.3.14). National Renewable Energy Laboratory. Golden, CO. Accessed October 31, 2016. https://sam.nrel.gov/content/downloads.
  properties: wet mass 1 kg

## Sampling procedure
This dataset is entirely based on the detailed life cycle inventory as presented in the dissertation report by
Telsnig, Thomas. 2015. Standortabhängige Analyse und Bewertung solarthermischer Kraftwerke am Beispiel Südafrikas. Forschungsbericht. Band 123. ISSN 0938-1228. Institut für Energiewirtschaft und Rationelle Energieanwendung, Universität Stuttgart, Germany.
The basics of that extensive report written in German as well as the procedure of bringing the data in that report into ecoinvent format are summarised in a report (in english) on the concentrated solar power datasets available on the ecoinvent ecoQuery webpage.
Further, data in Telsnig 2015 are not shown explicitely for the downscaled 20 MW solar tower power plant. This gap is filled in the ecoinvent report.

## Extrapolations
This dataset has been extrapolated from a dataset modelled for the location Upington, South Africa. The original data modelling a 440 MW power plant have been scaled down with parameter specific linear and non-linear equations to represent a 20 MW plant design. Uncertainty has not been adjusted as it is assumed that the modelled 20 MW solar tower power plant would be very similar in other parts of the world.

## Review by Christopher Oberschelp 2017-03-13
Very detailed, structured and well-documented datasets. Main exchanges have been checked and make sense.
