# treatment of waste paint, sanitary landfill

Dataset: EcoSpold 2, unit process
Geography: CH
Time period: 1994-01-01 to 2022-12-31
Technology level: current
Classification: ISIC rev.4 ecoinvent: 3821:Treatment and disposal of non-hazardous waste
Classification: EcoSpold01Categories: waste management/sanitary landfill
Tags: ConvertedDataset; Treatment
Scenario: Business-as-Usual
System model: Allocation at the point of substitution
Generated by: Gabor Doka
Published in: Doka G. 2007
Database: ecoinvent
isCopyrightProtected: true

## General comment
Inventoried waste contains 100% paint (remains); .
waste composition (wet, in ppm): upper heating value 10.86 MJ/kg; lower heating value 10.14 MJ/kg; H2O n.a.; O 290300; H 36288; C 651510; S n.a.; N n.a.; P n.a.; B n.a.; Cl 1600; Br n.a.; F n.a.; I n.a.; Ag n.a.; As 2.5; Ba n.a.; Cd 5.0622; Co 388.23; Cr 1040.7; Cu 59; Hg 0.6; Mn n.a.; Mo 38.619; Ni 15; Pb 15246; Sb n.a.; Se n.a.; Sn 256.78; V n.a.; Zn 3251.5; Be n.a.; Sc n.a.; Sr n.a.; Ti n.a.; Tl n.a.; W n.a.; Si n.a.; Fe n.a.; Ca n.a.; Al n.a.; K n.a.; Mg n.a.; Na n.a.;
Share of carbon in waste that is biogenic 0%.
Overall degradability of waste during 100 years: 1%.
[This dataset was already contained in the ecoinvent database version 2. It was not individually updated during the transfer to ecoinvent version 3. Life Cycle Impact Assessment results may still have changed, as they are affected by changes in the supply chain, i.e. in other datasets. This dataset was generated following the ecoinvent quality guidelines for version 2. It may have been subject to central changes described in the ecoinvent version 3 change report (http://www.ecoinvent.org/database/ecoinvent-version-3/reports-of-changes/), and the results of the central updates were reviewed extensively. The changes added e.g. consistent water flows and other information throughout the database. The documentation of this dataset can be found in the ecoinvent reports of version 2, which are still available via the ecoinvent website. The change report linked above covers all central changes that were made during the conversion process.]

## Included activities end
Waste-specific short-term emissions to air via landfill gas incineration and landfill leachate. Burdens from treatment of short-term leachate (0-100a) in wastewater treatment plant (including WWTP sludge disposal in municipal incinerator). Long-term emissions from landfill to groundwater (after base lining failure).

## Geography
Technology encountered in Switzerland in 2000. Landfill includes base seal, leachate collection system, treatment of leachate in municipal wastewater treatment plant.

## Technology
Swiss municipal sanitary landfill for biogenic or untreated municipal waste ('reactive organic landfill'). Landfill gas and leachate collection system. Recultivation and monitoring for 150 years after closure.

## Reference product
- waste paint: -1 kg; By-product classification Waste; CPC 39: Wastes or scraps
  production volume 0 kg
    Sanitary landfill of waste paint is not practiced in Switzerland.
  property carbon content, fossil 0.65
    Tab A.5, ecoinvent v2.2 report 13_I. C content has been calculated after data in the tables, and then referred to 1 kg DM
  property heating value, net 19.7 MJ
    LHV is calculated based on the Carbon content of the product. More details can be found on the respective documentation.
  property price 0 EUR2005
    Waste products are assigned a price of zero as they are assumed to require further treatment.
  properties: carbon allocation 0.65 kg, carbon content 0.65, carbon content, non-fossil 0, dry mass 1 kg, water content 0, water in wet mass 0 kg, wet mass 1 kg

## Inputs from technosphere
- cement, unspecified: 9.72e-7 kg; lognormal variance with pedigree 0.8, pedigree (1,1,5,1,1)
  burden from incineration of sludge from wastewater treatment of the short-term leachate (0-100a). uncertainty is calculated from uncertainties in waste composition and transfer coefficients in incinerator and uncertainty of waste decomposition and short-term leaching in sanitary landfill
  properties: dry mass 1 kg, wet mass 1 kg
- chemical, inorganic: 8.89e-10 kg; lognormal variance with pedigree 0.91, pedigree (1,1,5,1,1)
  (same comment as for cement, unspecified)
  properties: carbon content, fossil 0.003, dry mass 1 kg, wet mass 1 kg
  note on carbon content, fossil: This dataset is an unweighted average of 20 inorganic substances (listed in Tab 88.1, ecoinvent v2.2 report 8, part II), being part of the top100 chemicals included in this database. The C-content has also been calculated as an unweighted average of the C content of the substances composing this dataset.
- chemical, organic: 1.45e-8 kg; lognormal variance with pedigree 1.88, pedigree (1,1,5,1,1)
  (same comment as for cement, unspecified)
  properties: carbon content, fossil 0.628, dry mass 1 kg, heating value, net 19.03 MJ, wet mass 1 kg
  note on carbon content, fossil: This dataset is an unweighted average of 20 organic substances (listed in Tab 88.1, ecoinvent v2.2 report 8, part II), being part of the top100 chemicals included in this database. The C-content has also been calculated as an unweighted average of the C content of the substances composing this dataset.
- electricity, for reuse in municipal waste incineration only: 1.6e-5 kWh; name E_el_prod_MSWI; lognormal variance with pedigree 1.19, pedigree (1,1,5,1,1)
  (same comment as for cement, unspecified)
- electricity, low voltage: 0.000184 kWh; lognormal variance with pedigree 0.83, pedigree (5,5,5,5,5)
  burden from wastewater treatment of the short-term leachate (0-100a). Uncertainty calculated from unertainty of the waste composition of this waste, uncertainty in waste decomposition and short-term leaching in sanitary landfill
- heat, central or small-scale, other than natural gas: 3.2524e-5 MJ; lognormal variance with pedigree 0.2106, pedigree (5,5,5,5,5)
  (same comment as for electricity, low voltage)
  properties: heating value, net 1 MJ
- heat, district or industrial, natural gas: 4.4832e-5 MJ; lognormal variance with pedigree 0.2106, pedigree (5,5,5,5,5)
  (same comment as for electricity, low voltage)
  properties: heating value, net 1 MJ
- heat, for reuse in municipal waste incineration only: 9.35e-5 MJ; name E_th_prod_MSWI; lognormal variance with pedigree 0.77, pedigree (1,1,5,1,1)
  (same comment as for cement, unspecified)
- hydrochloric acid, without water, in 30% solution state: 5.33e-10 kg; lognormal variance with pedigree 0.91, pedigree (1,1,5,1,1)
  (same comment as for cement, unspecified)
  properties: dry mass 1 kg, heating value, net 3.32 MJ, wet mass 1 kg
- iron (III) chloride, without water, in 40% solution state: 1.62e-7 kg; lognormal variance with pedigree 0.91, pedigree (1,1,5,1,1)
  (same comment as for cement, unspecified)
  properties: dry mass 1 kg, wet mass 1 kg
- municipal waste incineration facility: 2.79e-14 unit; lognormal variance with pedigree 0.77, pedigree (1,1,5,1,1)
  Burden from incineration of sludge from wastewater treatment of the short-term leachate (0-100a).
  Burden from incineration of sludge from wastewater treatment of the short-term leachate (0-100a).
- process-specific burdens, municipal waste incineration: 0.000112 kg; lognormal variance with pedigree 0.77, pedigree (1,1,5,1,1)
  Burden from incineration of sludge from wastewater treatment of the short-term leachate (0-100a).
  Burden from incineration of sludge from wastewater treatment of the short-term leachate (0-100a).;activityLink introduced to establish a direct link to the corresponding regional supply of this product
- process-specific burdens, residual material landfill: 2.43e-6 kg; lognormal variance with pedigree 0.79, pedigree (1,1,5,1,1)
  burden from incineration of sludge from wastewater treatment of the short-term leachate (0-100a). uncertainty is calculated from uncertainties in waste composition and transfer coefficients in incinerator and uncertainty of waste decomposition and short-term leaching in sanitary landfill;activityLink introduced to establish a direct link to the corresponding regional supply of this product
- process-specific burdens, sanitary landfill: 1 kg; lognormal variance with pedigree 0.04, pedigree (1,1,5,1,1)
  demands per kilogram waste. uncertainty is heeded in the module;activityLink introduced to establish a direct link to the corresponding regional supply of this product
- process-specific burdens, slag landfill: 1.07e-6 kg; lognormal variance with pedigree 0.83, pedigree (1,1,5,1,1)
  (same comment as for process-specific burdens, residual material landfill)
- residual material landfill: 5.06e-15 unit; lognormal variance with pedigree 0.79, pedigree (1,1,5,1,1)
  (same comment as for cement, unspecified)
- sanitary landfill facility: 5.56e-10 unit; lognormal variance with pedigree 0.04, pedigree (1,1,5,1,1)
  demands per kilogram waste. uncertainty is heeded in the module
  This exchange has an activity link directly to the producing activity because the product is primarily consumed in the same geographical area where it is produced.
- sewer grid, 5E9l/year, 110 km: 5.45e-10 km; lognormal variance with pedigree 0.2106, pedigree (5,5,5,5,5)
  (same comment as for electricity, low voltage)
- slag landfill: 1.9e-15 unit; lognormal variance with pedigree 0.83, pedigree (1,1,5,1,1)
  (same comment as for cement, unspecified)
- waste cement, hydrated: -2.43e-6 kg; lognormal variance with pedigree 0.76, pedigree (1,1,1,1,1)
  (same comment as for cement, unspecified)
  production volume
    Sanitary landfill of waste paint is not practiced in Switzerland.
  properties: dry mass 1 kg, wet mass 1 kg
- waste graphical paper: -3.88e-5 kg; lognormal variance with pedigree 0.2106, pedigree (5,5,5,5,5)
  (same comment as for electricity, low voltage)
  production volume
    Sanitary landfill of waste paint is not practiced in Switzerland.
  properties: carbon content, non-fossil 0.454955, dry mass 0.888 kg, heating value, net 14.12 MJ, water content 0.126126, wet mass 1 kg
  note on heating value, net: Value taken from the general comment of the treatment dataset.
- waste plastic, mixture: -3.88e-5 kg; lognormal variance with pedigree 0.2106, pedigree (5,5,5,5,5)
  (same comment as for electricity, low voltage)
  production volume
    Sanitary landfill of waste paint is not practiced in Switzerland.
  properties: carbon content, fossil 0.747344, dry mass 0.847 kg, heating value, net 30.79 MJ, water content 0.180638, wet mass 1 kg
  note on carbon content, fossil: C content in 1 kg DM was calculated using data in Tab A.2, ecoinvent v2.2 report 13_I
- wastewater treatment facility, capacity 5E9l/year: 1.42e-11 unit; lognormal variance with pedigree 0.2106, pedigree (5,5,5,5,5)
  (same comment as for electricity, low voltage)

## Emissions to nature
- Arsenic ion [air, non-urban air or from high stacks]: 6.29e-11 kg; lognormal variance with pedigree 2.63, pedigree (1,1,5,1,1)
  burden from direct release or incineration of landfill biogas. Uncertainty calculated from unertainty of the waste composition of this waste, uncertainty in waste decomposition and short-term leaching in sanitary landfill
- Arsenic ion [air, urban air close to ground]: 1.26e-12 kg; lognormal variance with pedigree 2.11, pedigree (1,1,5,1,1)
  Emissions from short-term leachate treatment and incineration of resulting sludge. Uncertainty calculated depending on waste input and uncertainty of transfer coefficents in landfill, wastewater treatment and incineration model.
- Cadmium II [air, non-urban air or from high stacks]: 5.94e-11 kg; lognormal variance with pedigree 2.64, pedigree (1,1,5,1,1)
  (same comment as for Arsenic ion)
- Cadmium II [air, urban air close to ground]: 2.44e-13 kg; lognormal variance with pedigree 2.04, pedigree (1,1,5,1,1)
  (same comment as for Arsenic ion)
- Carbon dioxide, fossil [air, non-urban air or from high stacks]: 0.0163 kg; lognormal variance with pedigree 0.42, pedigree (1,1,5,1,1)
  (same comment as for Arsenic ion)
- Carbon dioxide, fossil [air, urban air close to ground]: 0.000545 kg; lognormal variance with pedigree 0.86, pedigree (1,1,5,1,1)
  (same comment as for Arsenic ion)
- Carbon monoxide, fossil [air, non-urban air or from high stacks]: 9.25e-7 kg; lognormal variance with pedigree 1.06, pedigree (1,1,5,1,1)
  (same comment as for Arsenic ion)
- Carbon monoxide, fossil [air, urban air close to ground]: 3.49e-7 kg; lognormal variance with pedigree 0.93, pedigree (1,1,5,1,1)
  (same comment as for Arsenic ion)
- Chromium III [air, non-urban air or from high stacks]: 2.97e-11 kg; lognormal variance with pedigree 2.7, pedigree (1,1,5,1,1)
  (same comment as for Arsenic ion)
- Chromium III [air, urban air close to ground]: 4.32e-15 kg; lognormal variance with pedigree 1.74, pedigree (1,1,5,1,1)
  (same comment as for Arsenic ion)
- Cobalt II [air, non-urban air or from high stacks]: 3.12e-10 kg; lognormal variance with pedigree 2.41, pedigree (1,1,5,1,1)
  (same comment as for Arsenic ion)
- Cobalt II [air, urban air close to ground]: 1.95e-14 kg; lognormal variance with pedigree 1.44, pedigree (1,1,5,1,1)
  (same comment as for Arsenic ion)
- Copper ion [air, non-urban air or from high stacks]: 8.25e-13 kg; lognormal variance with pedigree 3.17, pedigree (1,1,5,1,1)
  (same comment as for Arsenic ion)
- Copper ion [air, urban air close to ground]: 1.58e-14 kg; lognormal variance with pedigree 2.2, pedigree (1,1,5,1,1)
  (same comment as for Arsenic ion)
- Hydrochloric acid [air, non-urban air or from high stacks]: 5.81e-7 kg; lognormal variance with pedigree 1.42, pedigree (1,1,5,1,1)
  (same comment as for Arsenic ion)
- Lead II [air, non-urban air or from high stacks]: 2.99e-10 kg; lognormal variance with pedigree 2.41, pedigree (1,1,5,1,1)
  (same comment as for Arsenic ion)
- Lead II [air, urban air close to ground]: 2.97e-11 kg; lognormal variance with pedigree 1.44, pedigree (1,1,5,1,1)
  (same comment as for Arsenic ion)
- Mercury II [air, non-urban air or from high stacks]: 1.64e-10 kg; lognormal variance with pedigree 2.5, pedigree (1,1,5,1,1)
  (same comment as for Arsenic ion)
- Mercury II [air, urban air close to ground]: 6.96e-16 kg; lognormal variance with pedigree 2.44, pedigree (1,1,5,1,1)
  (same comment as for Arsenic ion)
- Methane, fossil [air, non-urban air or from high stacks]: 0.0025 kg; lognormal variance with pedigree 0.46, pedigree (1,1,5,1,1)
  (same comment as for Arsenic ion)
- Methane, fossil [air, urban air close to ground]: 1.07e-6 kg; lognormal variance with pedigree 0.91, pedigree (1,1,5,1,1)
  (same comment as for Arsenic ion)
- Molybdenum VI [air, non-urban air or from high stacks]: 1.02e-11 kg; lognormal variance with pedigree 2.86, pedigree (1,1,5,1,1)
  (same comment as for Arsenic ion)
- Molybdenum VI [air, urban air close to ground]: 4.01e-11 kg; lognormal variance with pedigree 1.81, pedigree (1,1,5,1,1)
  (same comment as for Arsenic ion)
- NMVOC, non-methane volatile organic compounds [air, non-urban air or from high stacks]: 1.75e-8 kg; lognormal variance with pedigree 0.46, pedigree (1,1,5,1,1)
  (same comment as for Arsenic ion)
- NMVOC, non-methane volatile organic compounds [air, urban air close to ground]: 4.84e-9 kg; lognormal variance with pedigree 1.03, pedigree (1,1,5,1,1)
  (same comment as for Arsenic ion)
- Nickel II [air, non-urban air or from high stacks]: 2.18e-12 kg; lognormal variance with pedigree 3.06, pedigree (1,1,5,1,1)
  (same comment as for Arsenic ion)
- Nickel II [air, urban air close to ground]: 1.48e-16 kg; lognormal variance with pedigree 2.1, pedigree (1,1,5,1,1)
  (same comment as for Arsenic ion)
- Particulate Matter, < 2.5 um [air, non-urban air or from high stacks]: 3.1e-7 kg; lognormal variance with pedigree 0.72, pedigree (1,1,5,1,1)
  (same comment as for Arsenic ion)
- Tin ion [air, non-urban air or from high stacks]: 3.78e-12 kg; lognormal variance with pedigree 2.97, pedigree (1,1,5,1,1)
  (same comment as for Arsenic ion)
- Tin ion [air, urban air close to ground]: 1.17e-11 kg; lognormal variance with pedigree 1.94, pedigree (1,1,5,1,1)
  (same comment as for Arsenic ion)
- Zinc II [air, non-urban air or from high stacks]: 3.42e-10 kg; lognormal variance with pedigree 2.39, pedigree (1,1,5,1,1)
  (same comment as for Arsenic ion)
- Zinc II [air, urban air close to ground]: 1.74e-11 kg; lognormal variance with pedigree 1.36, pedigree (1,1,5,1,1)
  (same comment as for Arsenic ion)
- Arsenic ion [water, ground-, long-term]: 2.5e-6 kg; lognormal variance with pedigree 1.49, pedigree (1,1,5,1,1)
  Emissions from long-term leachate (>100a) directly from MSW landfill and indirectly via incineration of treatement sludge from leachate treatement. Uncertainty calculated depending on waste input and uncertainty of long-term transfer coefficents in landfill.
- Arsenic ion [water, surface water]: 3.96e-9 kg; lognormal variance with pedigree 2.07, pedigree (1,1,5,1,1)
  (same comment as for Arsenic ion)
- BOD5, Biological Oxygen Demand [water, ground-, long-term]: 0.0428 kg; lognormal variance with pedigree 0.51, pedigree (1,1,5,1,1)
  (same comment as for Arsenic ion)
- BOD5, Biological Oxygen Demand [water, surface water]: 3.77e-5 kg; lognormal variance with pedigree 0.87, pedigree (1,1,5,1,1)
  (same comment as for Arsenic ion)
- COD, Chemical Oxygen Demand [water, ground-, long-term]: 0.181 kg; lognormal variance with pedigree 0.51, pedigree (1,1,5,1,1)
  (same comment as for Arsenic ion)
- COD, Chemical Oxygen Demand [water, surface water]: 0.00012 kg; lognormal variance with pedigree 0.86, pedigree (1,1,5,1,1)
  (same comment as for Arsenic ion)
- Cadmium II [water, ground-, long-term]: 5.05e-6 kg; lognormal variance with pedigree 1.4, pedigree (1,1,5,1,1)
  (same comment as for Arsenic ion)
- Cadmium II [water, surface water]: 4.52e-9 kg; lognormal variance with pedigree 1.98, pedigree (1,1,5,1,1)
  (same comment as for Arsenic ion)
- Chloride [water, ground-, long-term]: 0.00156 kg; lognormal variance with pedigree 0.64, pedigree (1,1,5,1,1)
  (same comment as for Arsenic ion)
- Chloride [water, surface water]: 4.03e-5 kg; lognormal variance with pedigree 0.9, pedigree (1,1,5,1,1)
  Emissions from short-term leachate treatment. Uncertainty calculated depending on waste input and uncertainty of transfer coefficents in landfill and wastewater treatment.
- Chromium III [water, surface water]: 1.86e-10 kg; lognormal variance with pedigree 1.66, pedigree (1,1,5,1,1)
  (same comment as for Arsenic ion)
- Chromium VI [water, ground-, long-term]: 4.72e-6 kg; lognormal variance with pedigree 7.98, pedigree (1,1,5,1,1)
  (same comment as for Arsenic ion)
- Chromium VI [water, surface water]: 6.21e-8 kg; lognormal variance with pedigree 1.63, pedigree (1,1,5,1,1)
  (same comment as for Arsenic ion)
- Cobalt II [water, ground-, long-term]: 0.000388 kg; lognormal variance with pedigree 0.82, pedigree (1,1,5,1,1)
  (same comment as for Arsenic ion)
- Cobalt II [water, surface water]: 6.33e-7 kg; lognormal variance with pedigree 1.33, pedigree (1,1,5,1,1)
  (same comment as for Arsenic ion)
- Copper ion [water, ground-, long-term]: 5.9e-5 kg; lognormal variance with pedigree 1.07, pedigree (1,1,5,1,1)
  (same comment as for Arsenic ion)
- Copper ion [water, surface water]: 7.49e-10 kg; lognormal variance with pedigree 2.12, pedigree (1,1,5,1,1)
  (same comment as for Arsenic ion)
- DOC, Dissolved Organic Carbon [water, ground-, long-term]: 0.165 kg; lognormal variance with pedigree 0.51, pedigree (1,1,5,1,1)
  (same comment as for Arsenic ion)
- DOC, Dissolved Organic Carbon [water, surface water]: 2.91e-5 kg; lognormal variance with pedigree 0.86, pedigree (1,1,5,1,1)
  (same comment as for Arsenic ion)
- Lead II [water, ground-, long-term]: 0.0152 kg; lognormal variance with pedigree 0.36, pedigree (1,1,5,1,1)
  (same comment as for Arsenic ion)
- Lead II [water, surface water]: 9.87e-8 kg; lognormal variance with pedigree 1.39, pedigree (1,1,5,1,1)
  (same comment as for Arsenic ion)
- Mercury II [water, ground-, long-term]: 5.99e-7 kg; lognormal variance with pedigree 1.67, pedigree (1,1,5,1,1)
  (same comment as for Arsenic ion)
- Mercury II [water, surface water]: 1.3e-10 kg; lognormal variance with pedigree 2.38, pedigree (1,1,5,1,1)
  (same comment as for Arsenic ion)
- Molybdenum VI [water, ground-, long-term]: 1.53e-5 kg; lognormal variance with pedigree 1.34, pedigree (1,1,5,1,1)
  (same comment as for Arsenic ion)
- Molybdenum VI [water, surface water]: 2.41e-8 kg; lognormal variance with pedigree 1.78, pedigree (1,1,5,1,1)
  (same comment as for Arsenic ion)
- Nickel II [water, ground-, long-term]: 1.5e-5 kg; lognormal variance with pedigree 1.25, pedigree (1,1,5,1,1)
  (same comment as for Arsenic ion)
- Nickel II [water, surface water]: 5.29e-9 kg; lognormal variance with pedigree 1.98, pedigree (1,1,5,1,1)
  (same comment as for Arsenic ion)
- TOC, Total Organic Carbon [water, ground-, long-term]: 0.165 kg; lognormal variance with pedigree 0.51, pedigree (1,1,5,1,1)
  (same comment as for Arsenic ion)
- TOC, Total Organic Carbon [water, surface water]: 3.03e-5 kg; lognormal variance with pedigree 0.86, pedigree (1,1,5,1,1)
  (same comment as for Arsenic ion)
- Tin ion [water, ground-, long-term]: 0.000257 kg; lognormal variance with pedigree 0.88, pedigree (1,1,5,1,1)
  (same comment as for Arsenic ion)
- Tin ion [water, surface water]: 6.33e-9 kg; lognormal variance with pedigree 1.9, pedigree (1,1,5,1,1)
  (same comment as for Arsenic ion)
- Zinc II [water, ground-, long-term]: 0.00268 kg; lognormal variance with pedigree 0.55, pedigree (1,1,5,1,1)
  (same comment as for Arsenic ion)
- Zinc II [water, surface water]: 4.76e-7 kg; lognormal variance with pedigree 1.3, pedigree (1,1,5,1,1)
  (same comment as for Arsenic ion)

## Sampling procedure
Landfill model based on observed leachate concentrations in literature. Extrapolated to 60'000 years heeding chemical characteristics. Initial waste composition from various literature sources.

## Review by Niels Jungbluth 2003-07-21
Passed. Calculation for standard deviation 95 of, i.e., infrastructure,
land occupation, transport services or other services can differ from
standard Pedigree approach used in this project and figures obtained by
this procedure.
