# treatment of waste wood, untreated, municipal incineration with fly ash extraction

Dataset: EcoSpold 2, unit process
Geography: CH
Time period: 2006-01-01 to 2022-12-31
Technology level: current
Classification: ISIC rev.4 ecoinvent: 3821:Treatment and disposal of non-hazardous waste
Synonyms: municipal waste incineration
Scenario: Business-as-Usual
System model: Allocation at the point of substitution
Share of production covered: 1.8 %
Generated by: Gabor Doka
Published in: Doka G. 2015
Database: ecoinvent
isCopyrightProtected: true

## General comment
This dataset represents the activity of waste disposal of waste wood, untreated in a municipal solid waste incinerator (MSWI) // Recommended use of this dataset: For small amounts of wood, which go to disposal as part of communal waste mixture. // // Waste composition (wet, in ppm): upper heating value 15.36 MJ/kg; lower heating value 13.99 MJ/kg; H2O 174080; O 372180; H 50163; C 401470; S 125.51; N 986.98; P 108.97; B 2.1107; Cl 330.95; Br n.a.; F 21.106; I n.a.; Ag n.a.; As 0.42213; Ba n.a.; Cd 0.20051; Co 0.086772; Cr 0.65782; Cu 4.1482; Hg 0.31976; Mn 53.118; Mo 0.8302; Ni 0.55581; Pb 27.868; Sb n.a.; Se n.a.; Sn n.a.; V n.a.; Zn 17.807; Be n.a.; Sc n.a.; Sr n.a.; Ti n.a.; Tl n.a.; W n.a.; Si n.a.; Fe 15.479; Ca 130.89; Al 6.3322; K 65.412; Mg 197.56; Na 14.071; // Share of carbon in waste that is biogenic 100%. // Share of metals in waste not oxidised and bulk-recyclable (exclude very small or thin parts) Iron: 0%; Alu: 0%; Copper: 0%. // Recovery of metal scrap from bottom ash to recycling: 0g iron scrap, 0g aluminium scrap, 0g copper scrap. From this waste, the FLUWA process in the technology mix recovers 0.000107kg (DM) of a hydroxide sludge to be recycled in zinc furnaces. // Ultimately one kg of this waste produces 0.01024 kg of bottom ash (can include some washed ash) and 0.001263 kg of residues, which are landfilled (technology mix). Additional solidification of residues with 0.0005053 kg of cement.Net energy production: 1.74MJ/kg electric energy and 3.5MJ/kg thermal energy. //

## Included activities start
waste incineration from waste reception gate and delivery into waste bunker at incinerator plant site (without transports to the incinerator)

## Included activities end
Waste-specific short-term emissions to water from leachate. Long-term emissions from landfill to ground water.

## Geography
Specific to the technology mix encountered in Switzerland in 2012.

## Technology
average Swiss MSWI plants in 2010 (grate incinerators) with electrostatic precipitator for fly ash (ESP), wet flue gas scrubber and 25% SNCR , 42.77% SCR-high dust , 32.68% SCR-low dust -DeNOx facilities and 0% without Denox (weighted according to mass of burnt waste, representing Swiss average). Efficiency of iron scrap separation from slag : 58%. Efficiency of non-ferrous scrap separation from slag : 31%. The technology mix for this dataset includes a filter ash treatment (FLUWA) of a share of 46.22%. Gross electric efficiency technology mix 15.84% and Gross thermal efficiency technology mix 28.51%

## Time period
Waste composition as given in literature reference, theoretical data or other source. Transfer coefficients for modern MSWI.

## Reference product
- heat, for reuse in municipal waste incineration only: 1 MJ; name E_th_prod_MSWI; By-product classification allocatable product; CPC 17300: Steam and hot water; lognormal variance with pedigree 0.081284, pedigree (1,1,1,1,1)
  Net useful heat generated from this waste and used in internal MSWI plant energy redistribution.
  Uncertainty: uncertainty is calculated from uncertainties in waste composition and uncertainties in energy efficiency and the uncertainty in internal energy demand
  production volume 1.1098e8 MJ
    calculated in proportion to reference product waste input to incinerator
  property exergy 0.1842 MJ; name E_th_prod_MSWI_exergy
    This exergy property is based on the exergy content of the product.
  property price 0.0106 EUR2005
    Average European district heat price from Ecoheatcool and Euroheat 2005-2006, Ecoheat Work package 1: The European heat market. Final report. 10.6 EUR/GJ i s the price of district heat. http://www.solarthermalworld.org/files/Ecoheatcool%20WP1%20Web.pdf?download
  property true value relation 0.1842; name E_th_prod_MSWI_true_value_relation
    property to calculate "true value" from
  properties: carbon allocation 0 kg, carbon content 0

## Inputs from technosphere
- EDTA, ethylenediaminetetraacetic acid: 2.72943e-7 kg
- EUR-flat pallet: 2.69545e-16 unit
- [sulfonyl]urea-compound: 7.31252e-8 kg
- [thio]carbamate-compound: 2.32756e-8 kg
- acetamide-anillide-compound, unspecified: 5.16854e-7 kg
- aluminium scrap, post-consumer: -1.37061e-7 kg
- aluminium sulfate, powder: 6.45283e-6 kg
- aluminium, cast alloy: 2.09913e-8 kg
- aluminium, wrought alloy: 7.73362e-7 kg
- ammonia, anhydrous, liquid: 6.3394e-8, 6.77431e-9, 8.23998e-8, 2.66309e-8, 2.48833e-7, 2.61117e-8, 1.90061e-8, 7.16424e-7, 4.60973e-9 kg (9 suppliers, which the file names only by identifier); sum of these 1.19418e-6 kg
- ammonium nitrate: 5.43832e-6, 4.95903e-6, 3.93825e-6, 2.64338e-5 kg (4 suppliers, which the file names only by identifier); sum of these 4.07694e-5 kg
- ammonium sulfate: 7.43683e-7, 4.02597e-6 kg (2 suppliers, which the file names only by identifier); sum of these 4.76965e-6 kg
- application of plant protection product, by field sprayer: 1.77404e-6 ha
- ash from paper production sludge: -7.94258e-8, -3.03855e-6 kg (2 suppliers, which the file names only by identifier); sum of these -3.11797e-6 kg
- bark chips, wet, measured as dry mass: 1.83192e-7, 8.82727e-6, 3.77896e-6, 5.18415e-8 kg (4 suppliers, which the file names only by identifier); sum of these 1.28413e-5 kg
- benzimidazole-compound: 4.97973e-8 kg
- biogas: 9.68299e-8 m3
- biowaste: -0.000559125, -4.92439e-6 kg (2 suppliers, which the file names only by identifier); sum of these -0.000564049 kg
- bipyridylium-compound: 8.251e-8 kg
- blasting: 1.45167e-7 kg
- blower and heat exchange unit, central, 600-1200 m3/h: 1.43801e-13 unit
- boric acid, anhydrous, powder: 4.10557e-7 kg
- brass: 2.0024e-9, 1.00623e-11 kg (2 suppliers, which the file names only by identifier); sum of these 2.01246e-9 kg
- cable, unspecified: 1.72369e-8 kg
- calcium carbonate, precipitated: 1.00552e-7 kg
- calendering, rigid sheets: 1.20744e-12 kg
- carbon dioxide, liquid: 9.0375e-8 kg
- cast iron: 9.77046e-6 kg
- cement mortar: 9.06423e-10 kg
- cement, Portland: 0.000348951 kg
- ceramic tile: 7.93328e-9 kg
- chemical factory, organics: 1.65417e-13 unit
- chemical, inorganic: 4.02333e-6 kg
- chemical, organic: 1.08488e-5 kg
- chlorine dioxide: 5.27056e-12, 2.6086e-7 kg (2 suppliers, which the file names only by identifier); sum of these 2.60865e-7 kg
- clay brick: 3.67283e-9 kg
- clay pit infrastructure: 2.4453e-14 unit
- cobalt: 2.0226e-9 kg
- coke: 9.69144e-7 MJ
- compost: 7.31541e-5 kg
- concrete, 30MPa: 5.1714e-13 m3
- concrete, normal strength: 7.38235e-10, 1.53427e-10, 1.05445e-10, 5.20685e-9, 1.62113e-10, 4.42427e-9, 1.31242e-9, 5.5657e-8, 3.12622e-9, 2.79206e-10 m3 (10 suppliers, which the file names only by identifier); sum of these 7.11652e-8 m3
- conveyor belt: 3.33521e-20 m
- copper oxide: 7.49099e-7 kg
- copper scrap, sorted, pressed: -1.63944e-10 kg
- copper, cathode: 9.30159e-6 kg
- cyclic N-compound: 5.22106e-7 kg
- diesel: 7.54072e-8, 7.63446e-9, 1.57589e-7, 5.28196e-9, 7.44608e-7, 1.7962e-9 kg (6 suppliers, which the file names only by identifier); sum of these 9.92317e-7 kg
- diesel, burned in agricultural machinery: 0.000321974 MJ
- diesel, burned in building machine: 1.26268e-5 MJ
- diesel, low-sulfur: 3.71846e-8 kg
- digester sludge: -3.15059e-8 kg
- dinitroaniline-compound: 4.48754e-9 kg
- diphenylether-compound: 9.49439e-9 kg
- dithiocarbamate-compound: 6.66108e-7 kg
- dolomite: 5.25346e-7, 2.78282e-7 kg (2 suppliers, which the file names only by identifier); sum of these 8.03628e-7 kg
- door, inner, wood: 1.19467e-11 m2
- electricity, high voltage: 4.70488e-6, 2.31882e-15 kWh (2 suppliers, which the file names only by identifier); sum of these 4.70488e-6 kWh
- electricity, low voltage: 7.59827e-9, 6.5666e-8, 2.06292e-9, 2.86715e-8, 6.86424e-9, 1.18149e-9, 8.2473e-9, 9.24264e-9, 6.35681e-9, 3.5072e-8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 kWh (77 suppliers, which the file names only by identifier); sum of these 4.90368e-5 kWh
- electricity, medium voltage: 1.24528e-9, 1.68145e-9, 5.88741e-10, 2.41824e-9, 5.04789e-10, 1.65698e-9, 4.35504e-7, 2.95671e-8, 1.64677e-10, 4.41251e-11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 kWh (111 suppliers, which the file names only by identifier); sum of these 0.00423489 kWh
- electronics scrap: -5.66541e-9 kg
- elevator, hydraulic: 8.26857e-13 unit
- energy and auxilliary inputs, metal working factory: 4.15047e-16, 9.25545e-17 kg (2 suppliers, which the file names only by identifier); sum of these 5.07601e-16 kg
- epoxy resin, liquid: 1.25355e-11 kg
- establishing orchard: 4.61322e-5 unit
- ethoxylated alcohol (AE3): 1.24063e-6 kg
- ethoxylated alcohol (AE7): 1.24063e-6 kg
- ethoxylated alcohol (AE>20): 1.17022e-9 kg
- excavation, hydraulic digger: 5.19233e-6 m3
- excavation, skid-steer loader: 1.98933e-7 m3
- extrusion, plastic film: 3.9757e-11 kg
- extrusion, plastic pipes: 4.01332e-7 kg
- fertilising, by broadcaster: 9.11548e-7 ha
- fibre cement corrugated slab: 2.32485e-10 kg
- fibre cement facing tile: 0.000566636 kg
- fibre cement roof slate: 9.94777e-5 kg
- flat glass, coated: 6.71546e-8 kg
- flat glass, uncoated: 3.89919e-11 kg
- fruit tree seedling, for planting: 4.61322e-5 unit
- glass fibre: 1.08223e-11 kg
- glass fibre reinforced plastic, polyester resin, hand lay-up: 6.96259e-11 kg
- glass wool mat: 5.49816e-10 kg
- glued laminated timber, MUF-glue: 1.4514e-7 m3
- glued laminated timber, PUR-glue: 1.4514e-7 m3
- glyphosate: 7.12361e-7 kg
- gravel, round: 0.00551748 kg
- green liquor dregs: -1.63064e-6 kg
- gypsum plasterboard: 1.1856e-7 kg
- gypsum, mineral: 1.36872e-5, 8.26702e-8, 6.41806e-8, 2.88064e-8 kg (4 suppliers, which the file names only by identifier); sum of these 1.38629e-5 kg
- hard coal: 2.80276e-9 kg
- harvesting, forestry harvester: 2.31525e-9 hour
- hazardous waste, for incineration: -5.24513e-7, -1.37104e-8 kg (2 suppliers, which the file names only by identifier); sum of these -5.38223e-7 kg
- hazardous waste, for underground deposit: -1.10977e-8 kg
- heat, central or small-scale, other than natural gas: 0.000505091 MJ
- heat, district or industrial, natural gas: 0.000104343, 5.98915e-7 MJ (2 suppliers, which the file names only by identifier); sum of these 0.000104942 MJ
- heat, district or industrial, other than natural gas: 1.43573e-7, 0.00350588, 1.46195e-11, 6.65148e-11, 3.13344e-5 MJ (5 suppliers, which the file names only by identifier); sum of these 0.00353736 MJ
- heavy fuel oil: 6.16298e-6, 5.18587e-8, 2.6364e-7, 6.65271e-8, 8.90564e-8, 2.24723e-6 kg (6 suppliers, which the file names only by identifier); sum of these 8.88129e-6 kg
- hoeing: 1.21572e-8 ha
- hydrochloric acid, without water, in 30% solution state: 5.21452e-9 kg
- hydrogen peroxide, without water, in 50% solution state: 2.8423e-5 kg
- industrial machine, heavy, unspecified: 8.76747e-17 kg
- inert waste: -9.60435e-9 kg
- inorganic nitrogen fertiliser, as N: 6.70868e-7, 6.00957e-10, 1.18581e-7, 1.66838e-10, 2.03179e-7, 1.83931e-8, 5.18049e-9, 2.76644e-9, 3.65341e-10, 1.16565e-8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 kg (65 suppliers, which the file names only by identifier); sum of these 1.75342e-5 kg
- inorganic phosphorus fertiliser, as P2O5: 1.16529e-9, 1.64878e-5, 2.54245e-8, 1.06597e-8, 1.39208e-6, 6.89137e-8, 1.15867e-8, 1.01963e-9, 1.19177e-9, 2.74108e-9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 kg (65 suppliers, which the file names only by identifier); sum of these 2.77841e-5 kg
- inorganic potassium fertiliser, as K2O: 4.31757e-7, 3.06525e-9, 2.30475e-9, 1.60583e-9, 3.66915e-9, 2.55743e-8, 2.23499e-9, 3.95476e-10, 1.76526e-7, 5.73687e-8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 kg (65 suppliers, which the file names only by identifier); sum of these 8.16852e-6 kg
- irrigation: 6.86645e-5, 4.7276e-6, 2.83909e-6, 7.1223e-8, 1.26934e-5, 1.54453e-5, 9.56216e-5, 3.85256e-5, 0.000400985, 2.76932e-6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 m3 (18 suppliers, which the file names only by identifier); sum of these 0.00222125 m3
- kaolin: 4.98889e-9 kg
- kraft paper: 1.73132e-11 kg
- lean concrete: 1.30582e-7 m3
- light fuel oil: 2.63635e-7 kg
- lignite briquettes: 9.02075e-5 MJ
- lime: 5.85873e-6, 6.78341e-5 kg (2 suppliers, which the file names only by identifier); sum of these 7.36928e-5 kg
- limestone residue: -3.3071e-6 kg
- linseed seed, at farm: 1.99981e-7 kg
- liquid manure spreading, by vacuum tanker: 2.13461e-7 m3
- lubricating oil: 8.57761e-9, 1.13743e-5 kg (2 suppliers, which the file names only by identifier); sum of these 1.13828e-5 kg
- magnesium oxide: 5.46584e-7 kg
- magnesium sulfate: 7.03105e-8 kg
- maize starch: 1.18017e-7 kg
- malusil: 3.57209e-8 kg
- mancozeb: 5.65401e-9 kg
- manganese concentrate: 2.57641e-8 kg
- manganese(III) oxide: 1.76579e-7 kg
- mango seedling, for planting: 8.71644e-8 unit
- manure, liquid, cattle: 0.000214811 kg
- manure, liquid, swine: 4.9514e-5 kg
- manure, solid, cattle: 0.000295566 kg
- metal working factory: 5.07601e-16 unit
- methanol: 3.80335e-9 kg
- methanol, from biomass: 7.53824e-8 kg
- molybdenum trioxide: 1.17503e-9 kg
- mowing, by motor mower: 3.90133e-7 ha
- mowing, by rotary mower: 9.94703e-8 ha
- mulching: 1.24526e-6 ha
- municipal solid waste: -6.56632e-7 kg
- naphtha: 2.83042e-8, 1.46589e-6, 1.71895e-7, 6.44867e-8, 9.10564e-10, 7.40795e-9, 1.20025e-7 kg (7 suppliers, which the file names only by identifier); sum of these 1.85892e-6 kg
- natural gas, high pressure: 2.46002e-6, 1.76264e-8 m3 (2 suppliers, which the file names only by identifier); sum of these 2.47765e-6 m3
- natural stone plate, cut: 2.14884e-10 kg
- nickel, class 1: 1.43304e-9 kg
- nitric acid, without water, in 50% solution state: 1.24063e-5 kg
- nitrile-compound: 2.50715e-8 kg
- organophosphorus-compound, unspecified: 3.96776e-7 kg
- oxygen, liquid: 1.29777e-6 kg
- ozone, liquid: 4.12323e-10 kg
- packaging film, low density polyethylene: 2.20181e-7 kg
- packaging, for fertilisers: 0.00048129 kg
- packaging, for pesticides: 1.43789e-5 kg
- packing, clay product: 0.000146425 kg
- paper mill, integrated: 4.20857e-15 unit
- paper, woodcontaining, lightweight coated: 1.10827e-7, 6.58301e-7 kg (2 suppliers, which the file names only by identifier); sum of these 7.69128e-7 kg
- paraffin: 3.15574e-6 kg
- particleboard, uncoated: 1.9589e-12 m3
- peat: 1.53002e-8 kg
- pendimethalin: 2.86078e-9 kg
- pesticide, unspecified: 7.43361e-8 kg
- petrol, unleaded, burned in machinery: 5.03299e-6 MJ
- phenol: 8.88135e-11, 2.77181e-10 kg (2 suppliers, which the file names only by identifier); sum of these 3.65994e-10 kg
- phenoxy-compound: 6.33573e-8 kg
- phosphate rock, beneficiated: 4.68056e-8, 1.10093e-5, 1.46157e-7, 1.45982e-7 kg (4 suppliers, which the file names only by identifier); sum of these 1.13482e-5 kg
- phthalimide-compound: 8.38017e-7 kg
- pitch: 9.50174e-10 kg
- planting tree: 4.55333e-5 unit
- planting with starter fertiliser, by no till planter: 2.31636e-10 ha
- plywood: 3.36412e-11, 1.43477e-10 m3 (2 suppliers, which the file names only by identifier); sum of these 1.77118e-10 m3
- polydimethylsiloxane: 2.11891e-10 kg
- polyethylene, high density, granulate: 4.01369e-7 kg
- polyethylene, low density, granulate: 4.13544e-7 kg
- polypropylene, granulate: 2.44063e-12 kg
- polystyrene foam slab: 3.45657e-11 kg
- polyurethane, rigid foam: 2.43315e-11 kg
- polyvinylchloride, bulk polymerised: 1.60143e-7 kg
- portafer: 6.53702e-8 kg
- potassium chloride: 3.98556e-5, 2.07959e-6 kg (2 suppliers, which the file names only by identifier); sum of these 4.19352e-5 kg
- potassium sulfate: 3.95574e-6, 2.29926e-5 kg (2 suppliers, which the file names only by identifier); sum of these 2.69484e-5 kg
- potato starch: 8.0477e-7 kg
- poultry manure, dried: 6.19082e-5 kg
- poultry manure, fresh: 4.71542e-6 kg
- printed wiring board, surface mounted, unspecified, Pb free: 1.72072e-9 kg
- printer, laser, black/white: 6.85439e-11 unit
- printer, laser, colour: 9.1691e-11 unit
- propane: 3.20655e-10 kg
- pulp factory: 5.11573e-14 unit
- pulpwood, hardwood, measured as solid wood under bark: 2.16996e-8 m3
- pulpwood, softwood, measured as solid wood under bark: 4.01479e-8, 1.18623e-7, 3.69831e-8, 1.25982e-7 m3 (4 suppliers, which the file names only by identifier); sum of these 3.21736e-7 m3
- pyrethroid-compound: 1.35584e-8 kg
- quicklime, milled, loose: 2.75888e-6 kg
- rape oil, crude: 2.63926e-11, 1.62301e-8 kg (2 suppliers, which the file names only by identifier); sum of these 1.62565e-8 kg
- reinforcing steel: 0.000130385 kg
- residual softwood, wet: 3.02035e-6 m3
- roof tile: 3.34679e-10 kg
- rosin size, for paper production: 2.53345e-8 kg
- sand: 4.09232e-10 kg
- sanitary ceramics: 1.69193e-9 kg
- sawlog and veneer log, eucalyptus ssp., measured as solid wood under bark: 7.47631e-7, 3.63448e-8, 5.24651e-9 m3 (3 suppliers, which the file names only by identifier); sum of these 7.89222e-7 m3
- sawnwood, beam, softwood, dried (u=10%), planed: 6.77659e-13 m3
- sawnwood, hardwood, raw, dried (u=20%): 5.43955e-9, 1.33837e-8 m3 (2 suppliers, which the file names only by identifier); sum of these 1.88233e-8 m3
- sawnwood, softwood, dried (u=10%), planed: 1.03428e-14 m3
- sawnwood, softwood, dried (u=20%), planed: 3.43388e-6 m3
- sawnwood, softwood, raw, dried (u=10%): 1.80999e-13 m3
- scrap aluminium: -5.92881e-6, -2.78166e-7, -7.69446e-9 kg (3 suppliers, which the file names only by identifier); sum of these -6.21467e-6 kg
- scrap copper: -9.27608e-6, -6.42982e-9, -1.35386e-8 kg (3 suppliers, which the file names only by identifier); sum of these -9.29605e-6 kg
- scrap steel: -1.10145e-9, -5.75725e-7, -8.6936e-7 kg (3 suppliers, which the file names only by identifier); sum of these -1.44619e-6 kg
- section bar rolling, steel: 9.07985e-16 kg
- sheet rolling, copper: 9.27578e-6 kg
- sheet rolling, steel: 1.31189e-10 kg
- slab and siding, softwood, wet, measured as dry mass: 1.20332e-6, 5.16996e-6, 4.66598e-6, 6.64042e-8 kg (4 suppliers, which the file names only by identifier); sum of these 1.11057e-5 kg
- sludge from pulp and paper production: -2.37912e-8, -2.14696e-6 kg (2 suppliers, which the file names only by identifier); sum of these -2.17075e-6 kg
- soda ash, light: 1.53827e-7 kg
- sodium chlorate, powder: 5.40571e-6 kg
- sodium chloride, powder: 1.46538e-7 kg
- sodium formate: 1.20267e-8 kg
- sodium hydrogen sulfite: 3.60811e-8 kg
- sodium hydroxide, without water, in 50% solution state: 6.44465e-5 kg
- sodium hypochlorite, without water, in 15% solution state: 2.32964e-9 kg
- sodium silicate, spray powder, 80%: 1.65819e-5 kg
- sodium sulfate, anhydrite: 3.96237e-7 kg
- solid manure loading and spreading, by hydraulic loader and spreader: 0.000258968 kg
- steel, chromium steel 18/8, hot rolled: 2.22275e-10 kg
- steel, low-alloyed: 7.61343e-7 kg
- steel, low-alloyed, hot rolled: 1.7126e-7 kg
- stone wool: 4.54142e-11 kg
- stone wool, packed: 2.27542e-11 kg
- sulfate pulp, bleached: 3.52271e-6, 6.21654e-7 kg (2 suppliers, which the file names only by identifier); sum of these 4.14436e-6 kg
- sulfate pulp, unbleached: 3.84107e-9 kg
- sulfite: 3.37539e-6, 1.79573e-7 kg (2 suppliers, which the file names only by identifier); sum of these 3.55497e-6 kg
- sulfur: 1.02934e-6 kg
- sulfuric acid: 6.20046e-5 kg
- swath, by rotary windrower: 1.21572e-8 ha
- synthetic rubber: 1.64376e-8 kg
- tap water: 1.89024e-11, 7.87733e-10, 3.12393e-11, 7.26876e-6, 5.8291e-11, 9.01442e-9, 2.04927e-11, 3.61806e-6 kg (8 suppliers, which the file names only by identifier); sum of these 1.08968e-5 kg
- tillage, harrowing, by offset leveling disc harrow: 4.63055e-10 ha
- tillage, harrowing, by rotary harrow: 1.87444e-7 ha
- tillage, ploughing: 1.20727e-7 ha
- tillage, rolling: 1.01096e-8 ha
- tillage, subsoiling, by subsoiler plow: 2.31525e-10 ha
- toner module, laser printer, black/white: 1.31604e-8 unit
- toner module, laser printer, colour: 1.76047e-8 unit
- transport, freight train: 3.65458e-5 metric ton*km
- transport, freight, inland waterways, barge: 1.49107e-5 metric ton*km
- transport, freight, lorry >32 metric ton, EURO5: 3.35061e-5 metric ton*km
- transport, freight, sea, bulk carrier for dry goods: 4.03623e-5 metric ton*km
- transport, tractor and trailer, agricultural: 6.99187e-6, 2.84322e-8 metric ton*km (2 suppliers, which the file names only by identifier); sum of these 7.0203e-6 metric ton*km
- trellis system, wooden poles, soft wood, tar impregnated: 2.70783e-7 ha
- triazine-compound, unspecified: 3.90792e-8 kg
- unreinforced concrete, 15MPa: 4.32876e-6 m3
- urea: 4.12907e-6, 4.33658e-5, 4.68123e-6, 2.09817e-5 kg (4 suppliers, which the file names only by identifier); sum of these 7.31578e-5 kg
- urea formaldehyde resin: 3.41675e-5, 7.19751e-6 kg (2 suppliers, which the file names only by identifier); sum of these 4.1365e-5 kg
- used cable: -1.72369e-8 kg
- used door, inner, wood: -1.19467e-11 m2
- used printed wiring boards: -1.72072e-9 kg
- used toner module, laser printer, black/white: -1.15812e-8 kg
- used toner module, laser printer, colour: -1.54921e-8 kg
- used window frame, wood-metal: -7.21341e-11 m2
- waste bitumen: -9.47279e-10 kg
- waste bitumen sheet: -1.13725e-5 kg
- waste brick: -0.00066612 kg
- waste building wood, chrome preserved: -0.000637989 kg
- waste bulk iron, excluding reinforcement: -9.77098e-6 kg
- waste cement in concrete and mortar: -0.000612182 kg
- waste concrete: -4.50336e-10, -1.41286e-5, -1.72981e-9 kg (3 suppliers, which the file names only by identifier); sum of these -1.41308e-5 kg
- waste concrete, not reinforced: -0.000287279 kg
- waste fibreboard: -1.34473e-9 kg
- waste glass: -6.77044e-8, -1.07973e-11 kg (2 suppliers, which the file names only by identifier); sum of these -6.77152e-8 kg
- waste glass sheet: -2.74388e-10 kg
- waste graphical paper: -1.9567e-6, -1.82698e-14 kg (2 suppliers, which the file names only by identifier); sum of these -1.9567e-6 kg
- waste gypsum plasterboard: -1.1856e-7 kg
- waste mineral oil: -3.89286e-10, -1.57249e-8 kg (2 suppliers, which the file names only by identifier); sum of these -1.61142e-8 kg
- waste mineral wool: -6.81684e-11 kg
- waste packaging paper: -2.86447e-9 kg
- waste plastic, mixture: -6.16906e-6, -7.19818e-12 kg (2 suppliers, which the file names only by identifier); sum of these -6.16906e-6 kg
- waste polyethylene: -4.01332e-7 kg
- waste polyethylene/polypropylene product: -2.44127e-10 kg
- waste polystyrene isolation, flame-retardant: -1.99526e-10 kg
- waste polyurethane foam: -2.43315e-11 kg
- waste polyvinylchloride: -8.21517e-11, -4.26047e-10, -1.81254e-10, -4.48662e-10, -1.08626e-9, -3.00168e-8, -1.409e-8, -1.13811e-7 kg (8 suppliers, which the file names only by identifier); sum of these -1.60142e-7 kg
- waste polyvinylchloride product: -2.87138e-13 kg
- waste reinforced concrete: -0.0101675 kg
- waste rubber, unspecified: -3.3518e-10, -7.98431e-9, -7.98431e-9 kg (3 suppliers, which the file names only by identifier); sum of these -1.63038e-8 kg
- waste sealing sheet, polyvinylchloride: -1.20744e-12 kg
- waste textile, soiled: -6.35969e-7 kg
- waste wood, untreated: -9.43703e-7, -3.9322e-6, -2.7836e-7, -2.16372e-6, -8.87283e-7, -1.78896e-6, -2.45424e-7, -0.00134258, -4.42721e-8, -1.42082e-6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 kg (44 suppliers, which the file names only by identifier); sum of these -0.00261361 kg
- wastewater from particle board production: -6.79527e-10, -2.78198e-9 m3 (2 suppliers, which the file names only by identifier); sum of these -3.46151e-9 m3
- wastewater, average: -3.61806e-9 m3
- wastewater, unpolluted: -0.000189972 m3
- water, decarbonised: 0.032879, 0.00010356, 0.163094, 0.108112, 0.00596845 kg (5 suppliers, which the file names only by identifier); sum of these 0.310158 kg
- weed control, by brush cutter, pasture: 4.16559e-8 ha
- white spirit: 5.16929e-8 kg
- window frame, aluminium, U=1.6 W/m2K: 2.48614e-9 m2
- window frame, wood-metal, U=1.6 W/m2K: 7.21341e-11 m2
- wood ash mixture, pure: -5.16662e-8, -2.51338e-6, -1.51061e-7 kg (3 suppliers, which the file names only by identifier); sum of these -2.71611e-6 kg
- wood chipping, chipper, mobile, diesel, at forest road: 3.03603e-9 hour
- wood chips, dry, measured as dry mass: 1.23703e-5 kg
- wood chips, wet, measured as dry mass: 9.31743e-6, 4.86055e-5, 3.54491e-7 kg (3 suppliers, which the file names only by identifier); sum of these 5.82774e-5 kg
- wood pellet, measured as dry mass: 1.35523e-7 kg
- wooden board factory, organic bonded boards: 1.92114e-14 unit
- zinc: 6.6305e-8 kg
- zinc coat, coils: 3.33461e-11 m2
- zinc coat, pieces: 6.78753e-7 m2
- zinc monosulfate: 1.68918e-7, 3.19758e-8 kg (2 suppliers, which the file names only by identifier); sum of these 2.00894e-7 kg
- zinc oxide: 6.76608e-8 kg

## Inputs from nature
- Carbon dioxide, in air [natural resource, in air]: 0.00272033 kg
- Energy, gross calorific value, in biomass [natural resource, biotic]: 0.0317628 MJ
- Occupation, annual crop, irrigated [natural resource, land]: 7.01036e-5 m2*year
- Occupation, construction site [natural resource, land]: 1.85019e-5 m2*year
- Occupation, industrial area [natural resource, land]: 2.14847e-6 m2*year
- Occupation, permanent crop [natural resource, land]: 8.73158e-5 m2*year
- Occupation, permanent crop, irrigated [natural resource, land]: 0.00632115 m2*year
- Occupation, urban, continuously built [natural resource, land]: 4.21921e-8 m2*year
- Occupation, urban, discontinuously built [natural resource, land]: 0.000925088 m2*year
- Oxygen [natural resource, in air]: 0.000205248 kg
- Transformation, from annual crop, irrigated [natural resource, land]: 0.000135443 m2
- Transformation, from pasture, man made [natural resource, land]: 1.85018e-5 m2
- Transformation, from permanent crop [natural resource, land]: 4.36579e-6 m2
- Transformation, from permanent crop, irrigated [natural resource, land]: 0.000270301 m2
- Transformation, from unspecified [natural resource, land]: 1.07423e-7 m2
- Transformation, from urban, green area [natural resource, land]: 5.62562e-10 m2
- Transformation, to annual crop, irrigated [natural resource, land]: 0.000135443 m2
- Transformation, to industrial area [natural resource, land]: 1.07423e-7 m2
- Transformation, to permanent crop [natural resource, land]: 4.36579e-6 m2
- Transformation, to permanent crop, irrigated [natural resource, land]: 0.000270301 m2
- Transformation, to urban, continuously built [natural resource, land]: 5.62562e-10 m2
- Transformation, to urban, discontinuously built [natural resource, land]: 1.85018e-5 m2
- Water, cooling, unspecified natural origin [natural resource, in water]: 4.51781e-6 m3
- Water, unspecified natural origin [natural resource, in ground]: 1.08099e-6 m3
- Water, unspecified natural origin [natural resource, in water]: 1.68655e-5 m3
- Water, well, in ground [natural resource, in water]: 5.74427e-7 m3

## Emissions to nature
- Acetaldehyde [air, urban air close to ground]: 2.78575e-11 kg
- Acetic acid [air, urban air close to ground]: 4.10166e-11 kg
- Acetone [air, urban air close to ground]: 5.95321e-12 kg
- Aluminium III [air, urban air close to ground]: 1.0865e-9 kg
- Ammonia [air, non-urban air or from high stacks]: 1.22e-5 kg
- Ammonia [air, unspecified]: 6.8014e-8 kg
- Ammonia [air, urban air close to ground]: 1.4422e-8 kg
- Antimony ion [air, urban air close to ground]: 2.28778e-12 kg
- Arsenic ion [air, urban air close to ground]: 5.46286e-12 kg
- Barium II [air, urban air close to ground]: 2.29932e-11 kg
- Benzene [air, unspecified]: 1.41996e-13 kg
- Benzene [air, urban air close to ground]: 8.23452e-10 kg
- Benzene, ethyl- [air, urban air close to ground]: 1.07162e-11 kg
- Benzene, hexachloro- [air, urban air close to ground]: 2.57188e-18 kg
- Benzo(a)pyrene [air, urban air close to ground]: 1.98844e-12 kg
- Beryllium II [air, urban air close to ground]: 2.29932e-13 kg
- Boron [air, urban air close to ground]: 1.03061e-9 kg
- Bromine [air, urban air close to ground]: 2.28158e-11 kg
- Butane [air, urban air close to ground]: 8.43137e-11 kg
- Cadmium II [air, urban air close to ground]: 9.48379e-13 kg
- Calcium [air, urban air close to ground]: 6.65855e-9 kg
- Carbon dioxide, fossil [air, non-urban air or from high stacks]: 8.94273e-5 kg
- Carbon dioxide, fossil [air, unspecified]: 2.82138e-5 kg
- Carbon dioxide, fossil [air, urban air close to ground]: 1.87222e-5 kg
- Carbon dioxide, from soil or biomass stock [air, non-urban air or from high stacks]: 0.000886843 kg
- Carbon dioxide, non-fossil [air, unspecified]: 8.13165e-5 kg
- Carbon dioxide, non-fossil [air, urban air close to ground]: 0.000263321 kg
- Carbon monoxide, fossil [air, unspecified]: 5.57129e-9 kg
- Carbon monoxide, fossil [air, urban air close to ground]: 5.94851e-8 kg
- Carbon monoxide, non-fossil [air, unspecified]: 1.05576e-6 kg
- Carbon monoxide, non-fossil [air, urban air close to ground]: 1.61446e-7 kg
- Chlorine [air, urban air close to ground]: 6.4297e-11 kg
- Chromium III [air, urban air close to ground]: 7.96883e-12 kg
- Chromium VI [air, urban air close to ground]: 8.31598e-14 kg
- Cobalt II [air, urban air close to ground]: 4.73768e-12 kg
- Copper ion [air, urban air close to ground]: 1.98599e-11 kg
- Dinitrogen monoxide [air, non-urban air or from high stacks]: 1.7956e-6 kg
- Dinitrogen monoxide [air, unspecified]: 1.65417e-8 kg
- Dinitrogen monoxide [air, urban air close to ground]: 2.81365e-9 kg
- Dioxins, measured as 2,3,7,8-tetrachlorodibenzo-p-dioxin [air, urban air close to ground]: 1.13021e-17 kg
- Ethane [air, urban air close to ground]: 1.35698e-9 kg
- Ethanol [air, urban air close to ground]: 1.19064e-11 kg
- Ethylene [air, urban air close to ground]: 2.71396e-9 kg
- Ethyne [air, urban air close to ground]: 4.52326e-10 kg
- Fluorine [air, urban air close to ground]: 1.78603e-11 kg
- Formaldehyde [air, unspecified]: 8.65376e-8 kg
- Formaldehyde [air, urban air close to ground]: 9.63982e-11 kg
- Heat, waste [air, non-urban air or from high stacks]: 0.000129587 MJ
- Hydrocarbons, aliphatic, alkanes, unspecified [air, unspecified]: 9.46145e-10 kg
- Hydrocarbons, aliphatic, alkanes, unspecified [air, urban air close to ground]: 8.07337e-10 kg
- Hydrocarbons, aliphatic, unsaturated [air, urban air close to ground]: 1.56085e-9 kg
- Hydrocarbons, aromatic [air, urban air close to ground]: 6.33697e-12 kg
- Hydrochloric acid [air, urban air close to ground]: 3.99868e-10 kg
- Hydrogen fluoride [air, urban air close to ground]: 1.45446e-11 kg
- Hydrogen sulfide [air, urban air close to ground]: 2.53348e-9 kg
- Iodine [air, urban air close to ground]: 4.12335e-12 kg
- Iron ion [air, urban air close to ground]: 1.26608e-9 kg
- Lead II [air, urban air close to ground]: 6.06587e-12 kg
- Lead-210 [air, urban air close to ground]: 5.65106e-9 kBq
- Magnesium [air, urban air close to ground]: 8.17497e-10 kg
- Manganese II [air, urban air close to ground]: 6.30342e-11 kg
- Mercury II [air, urban air close to ground]: 4.9677e-13 kg
- Methane, fossil [air, urban air close to ground]: 2.19705e-9 kg
- Methane, non-fossil [air, urban air close to ground]: 3.87727e-9 kg
- Methanol [air, urban air close to ground]: 2.02409e-11 kg
- Molybdenum VI [air, urban air close to ground]: 4.31641e-12 kg
- NMVOC, non-methane volatile organic compounds [air, unspecified]: 2.0769e-7 kg
- NMVOC, non-methane volatile organic compounds [air, urban air close to ground]: 6.3741e-8 kg
- Nickel II [air, urban air close to ground]: 2.67518e-11 kg
- Nitrogen oxides [air, non-urban air or from high stacks]: 2.84689e-6 kg
- Nitrogen oxides [air, unspecified]: 1.30808e-7 kg
- Nitrogen oxides [air, urban air close to ground]: 1.52936e-6 kg
- PAH, polycyclic aromatic hydrocarbons [air, urban air close to ground]: 5.14142e-12 kg
- Particulate Matter, < 2.5 um [air, unspecified]: 1.80653e-8 kg
- Particulate Matter, < 2.5 um [air, urban air close to ground]: 7.39538e-10 kg
- Particulate Matter, > 10 um [air, unspecified]: 4.61534e-8 kg
- Particulate Matter, > 10 um [air, urban air close to ground]: 6.91395e-9 kg
- Particulate Matter, > 2.5 um and < 10um [air, unspecified]: 5.19427e-8 kg
- Particulate Matter, > 2.5 um and < 10um [air, urban air close to ground]: 8.43683e-9 kg
- Pentane [air, urban air close to ground]: 1.40316e-10 kg
- Phenol [air, urban air close to ground]: 4.51803e-11 kg
- Phenol, pentachloro- [air, urban air close to ground]: 2.89337e-15 kg
- Phosphorus [air, urban air close to ground]: 1.16354e-10 kg
- Polonium-210 [air, urban air close to ground]: 1.03901e-8 kBq
- Potassium I [air, urban air close to ground]: 8.49728e-9 kg
- Potassium-40 [air, urban air close to ground]: 1.52316e-9 kBq
- Propane [air, urban air close to ground]: 9.29039e-10 kg
- Propene [air, urban air close to ground]: 4.52326e-10 kg
- Propionic acid [air, urban air close to ground]: 2.29383e-12 kg
- Radium-226 [air, urban air close to ground]: 1.45834e-9 kBq
- Radium-228 [air, urban air close to ground]: 8.45184e-10 kBq
- Radon-220 [air, urban air close to ground]: 3.6249e-10 kBq
- Radon-222 [air, urban air close to ground]: 3.6249e-10 kBq
- Scandium [air, urban air close to ground]: 5.84276e-14 kg
- Selenium IV [air, urban air close to ground]: 7.33552e-12 kg
- Silicon [air, urban air close to ground]: 1.09502e-8 kg
- Sodium [air, urban air close to ground]: 6.99914e-10 kg
- Strontium [air, urban air close to ground]: 2.41446e-11 kg
- Sulfur dioxide [air, urban air close to ground]: 7.95005e-7 kg
- Sulfur oxides [air, unspecified]: 4.55094e-9 kg
- Sulfur trioxide [air, unspecified]: 9.86529e-9 kg
- Thallium I [air, urban air close to ground]: 1.30404e-14 kg
- Thorium [air, urban air close to ground]: 2.75783e-13 kg
- Thorium-228 [air, urban air close to ground]: 6.74429e-10 kBq
- Thorium-232 [air, urban air close to ground]: 4.19325e-10 kBq
- Tin ion [air, urban air close to ground]: 1.8319e-13 kg
- Titanium ion [air, urban air close to ground]: 2.32582e-11 kg
- Toluene [air, urban air close to ground]: 2.2214e-10 kg
- Uranium [air, urban air close to ground]: 4.58971e-13 kg
- Uranium-238 [air, urban air close to ground]: 1.22131e-9 kBq
- Vanadium V [air, urban air close to ground]: 5.17457e-11 kg
- Water [air, non-urban air or from high stacks]: 0.00109432 m3
- Water [air, unspecified]: 0.000183989 m3
- Xylene [air, urban air close to ground]: 2.98295e-10 kg
- Zinc II [air, urban air close to ground]: 1.19215e-10 kg
- m-Xylene [air, urban air close to ground]: 4.28647e-11 kg
- 2,4-D [soil, agricultural]: 3.16518e-8 kg
- Abamectin [soil, agricultural]: 3.03069e-10 kg
- Acetamiprid [soil, agricultural]: 6.83852e-9 kg
- Aldicarb [soil, agricultural]: 3.83326e-10 kg
- Azoxystrobin [soil, agricultural]: 2.56152e-8 kg
- Benomyl [soil, agricultural]: 8.1202e-12 kg
- Buprofezin [soil, agricultural]: 4.59759e-10 kg
- Cadmium II [soil, agricultural]: 2.36507e-9 kg
- Captan [soil, agricultural]: 8.38017e-7 kg
- Carbendazim [soil, agricultural]: 6.7415e-9 kg
- Carbofuran [soil, agricultural]: 5.42949e-9 kg
- Chloride [soil, agricultural]: 6.38082e-12 kg
- Chlorothalonil [soil, agricultural]: 4.21156e-8 kg
- Chlorpyrifos [soil, agricultural]: 7.99774e-10 kg
- Chlorpyrifos methyl [soil, agricultural]: 2.05985e-7 kg
- Chromium III [soil, agricultural]: 1.74302e-8 kg
- Copper ion [soil, agricultural]: 6.70737e-7 kg
- Cypermethrin [soil, agricultural]: 1.36565e-8 kg
- Cyproconazole [soil, agricultural]: 3.41254e-8 kg
- Cyprodinil [soil, agricultural]: 3.42738e-12 kg
- Difenoconazole [soil, agricultural]: 1.22319e-9 kg
- Diflubenzuron [soil, agricultural]: 6.42243e-10 kg
- Diflufenican [soil, agricultural]: 9.39624e-9 kg
- Dimethoate [soil, agricultural]: 6.51294e-8 kg
- Diuron [soil, agricultural]: 7.93202e-9 kg
- Ethephon [soil, agricultural]: 1.78422e-9 kg
- Fenbuconazole [soil, agricultural]: 2.37509e-11 kg
- Fosetyl [soil, agricultural]: 1.69245e-10 kg
- Glufosinate [soil, agricultural]: 2.10278e-9 kg
- Glyphosate [soil, agricultural]: 7.20358e-7 kg
- Hexaconazole [soil, agricultural]: 6.584e-9 kg
- Imidacloprid [soil, agricultural]: 2.06826e-8 kg
- Indoxacarb [soil, agricultural]: 2.93756e-8 kg
- Iprodione [soil, agricultural]: 3.77544e-7 kg
- Kaolin [soil, agricultural]: 4.98881e-9 kg
- Lead II [soil, agricultural]: 5.15723e-9 kg
- MCPA [soil, agricultural]: 3.17055e-8 kg
- Malathion [soil, agricultural]: 7.47264e-10 kg
- Mancozeb [soil, agricultural]: 6.71762e-7 kg
- Mercury II [soil, agricultural]: 2.89399e-11 kg
- Metalaxyl-M [soil, agricultural]: 5.28034e-7 kg
- Methiocarb [soil, agricultural]: 5.43356e-10 kg
- Methoxyfenozide [soil, agricultural]: 3.94267e-9 kg
- Mineral oil [soil, agricultural]: 1.85906e-6 kg
- Myclobutanil [soil, agricultural]: 1.14069e-8 kg
- Nickel II [soil, agricultural]: 2.60842e-9 kg
- Norflurazon [soil, agricultural]: 1.83383e-9 kg
- Oils, unspecified [soil, industrial]: 9.17299e-9 kg
- Oryzalin [soil, agricultural]: 4.528e-10 kg
- Oxamyl [soil, agricultural]: 2.96886e-11 kg
- Oxyfluorfen [soil, agricultural]: 6.32668e-8 kg
- Paraquat [soil, agricultural]: 8.26942e-8 kg
- Pendimethalin [soil, agricultural]: 6.82489e-9 kg
- Pesticides, unspecified [soil, agricultural]: 3.58771e-8 kg
- Phosmet [soil, agricultural]: 4.12005e-10 kg
- Pirimiphos methyl [soil, agricultural]: 5.91289e-9 kg
- Pyraclostrobin [soil, agricultural]: 1.7556e-8 kg
- Rimsulfuron [soil, agricultural]: 9.13977e-13 kg
- Simazine [soil, agricultural]: 3.89633e-8 kg
- Spinosad [soil, agricultural]: 3.1798e-10 kg
- Sulfur [soil, agricultural]: 6.72178e-7 kg
- Tebuconazole [soil, agricultural]: 1.96481e-9 kg
- Terbufos [soil, agricultural]: 1.05613e-7 kg
- Thiamethoxam [soil, agricultural]: 3.39719e-8 kg
- Thiophanate-methyl [soil, agricultural]: 6.71792e-9 kg
- Thiram [soil, agricultural]: 1.44062e-11 kg
- Trifloxystrobin [soil, agricultural]: 1.94314e-10 kg
- Zinc II [soil, agricultural]: 7.59685e-8 kg
- AOX, Adsorbable Organic Halogen [water, surface water]: 2.29768e-9 kg
- AOX, Adsorbable Organic Halogen [water, unspecified]: 1.17365e-9 kg
- Aluminium III [water, unspecified]: 6.20985e-7 kg
- Ammonium [water, unspecified]: 9.09626e-10 kg
- BOD5, Biological Oxygen Demand [water, ground-]: 8.41865e-5 kg
- BOD5, Biological Oxygen Demand [water, surface water]: 1.11626e-6 kg
- BOD5, Biological Oxygen Demand [water, unspecified]: 2.41996e-8 kg
- COD, Chemical Oxygen Demand [water, ground-]: 0.000168373 kg
- COD, Chemical Oxygen Demand [water, surface water]: 6.20254e-6 kg
- COD, Chemical Oxygen Demand [water, unspecified]: 6.11602e-7 kg
- Cadmium II [water, ground-]: 2.02667e-11 kg
- Cadmium II [water, surface water]: 3.90465e-11 kg
- Cadmium II [water, unspecified]: 3.10365e-10 kg
- Chloride [water, unspecified]: 2.82463e-6 kg
- Chromium III [water, ground-]: 1.12632e-8 kg
- Chromium III [water, surface water]: 4.2254e-9 kg
- Chromium III [water, unspecified]: 2.82023e-12 kg
- Copper ion [water, ground-]: 1.92939e-9 kg
- Copper ion [water, surface water]: 6.01094e-9 kg
- Copper ion [water, unspecified]: 6.21678e-9 kg
- DOC, Dissolved Organic Carbon [water, ground-]: 6.23604e-5 kg
- DOC, Dissolved Organic Carbon [water, surface water]: 2.26139e-6 kg
- DOC, Dissolved Organic Carbon [water, unspecified]: 1.35368e-7 kg
- EDTA, Ethylenediaminetetraacetic Acid [water, unspecified]: 5.00367e-11 kg
- Formaldehyde [water, unspecified]: 4.2115e-11 kg
- Iron ion [water, unspecified]: 9.30473e-9 kg
- Lead II [water, ground-]: 8.69995e-11 kg
- Lead II [water, surface water]: 1.37031e-9 kg
- Lead II [water, unspecified]: 8.27334e-9 kg
- Manganese II [water, unspecified]: 5.31959e-8 kg
- Mercury II [water, ground-]: 7.9627e-12 kg
- Mercury II [water, surface water]: 9.45407e-12 kg
- Mercury II [water, unspecified]: 1.03429e-13 kg
- Nickel II [water, ground-]: 2.13093e-12 kg
- Nickel II [water, surface water]: 2.72987e-9 kg
- Nickel II [water, unspecified]: 9.01534e-8 kg
- Nitrate [water, ground-]: 0.000117714 kg
- Nitrate [water, unspecified]: 1.79418e-9 kg
- Nitrogen [water, surface water]: 1.08009e-7 kg
- Nitrogen [water, unspecified]: 1.3539e-8 kg
- Phosphate [water, ground-]: 1.07863e-7 kg
- Phosphate [water, surface water]: 5.03467e-7 kg
- Phosphorus [water, ground-]: 6.11218e-10 kg
- Phosphorus [water, surface water]: 1.57842e-7 kg
- Phosphorus [water, unspecified]: 1.04146e-9 kg
- Sodium I [water, unspecified]: 1.79064e-5 kg
- Sulfate [water, unspecified]: 4.67304e-5 kg
- Suspended solids, unspecified [water, surface water]: 1.21333e-6 kg
- Suspended solids, unspecified [water, unspecified]: 1.10537e-7 kg
- TOC, Total Organic Carbon [water, ground-]: 6.23604e-5 kg
- TOC, Total Organic Carbon [water, surface water]: 2.26139e-6 kg
- TOC, Total Organic Carbon [water, unspecified]: 1.35368e-7 kg
- Tin ion [water, unspecified]: 5.16929e-8 kg
- Water [water, ground-]: 0.000248397 m3
- Water [water, surface water]: 0.000820901 m3
- Water [water, unspecified]: 1.70637e-5 m3
- Zinc II [water, ground-]: 9.09134e-9 kg
- Zinc II [water, surface water]: 6.48654e-9 kg
- Zinc II [water, unspecified]: 1.86802e-8 kg
