# treatment of waste wood, untreated, unsanitary landfill, very wet infiltration class (1000mm)

Dataset: EcoSpold 2, unit process
Geography: GLO
Time period: 2006-01-01 to 2022-12-31
Technology level: current
Classification: ISIC rev.4 ecoinvent: 3821:Treatment and disposal of non-hazardous waste
Synonyms: municipal waste landfill
Scenario: Business-as-Usual
System model: Allocation at the point of substitution
Share of production covered: 1 %
Generated by: Avraam Symeonidis
Database: ecoinvent
isCopyrightProtected: true

## General comment
This dataset represents the activity of waste disposal of waste wood, untreated in a unsanitary landfill. Recommended use of this dataset: For untreated waste wood, which goes to disposal as part of managed communal waste mixture. // Waste composition (wet, in ppm): upper heating value 15.36 MJ/kg; lower heating value 13.99 MJ/kg; H2O 174080; O 372180; H 50163; C 401470; S 125.51; N 986.98; P 108.97; B 2.1107; Cl 330.95; Br n.a.; F 21.106; I n.a.; Ag n.a.; As 0.42213; Ba n.a.; Cd 0.20051; Co 0.086772; Cr 0.65782; Cu 4.1482; Hg 0.31976; Mn 53.118; Mo 0.8302; Ni 0.55581; Pb 27.868; Sb n.a.; Se n.a.; Sn n.a.; V n.a.; Zn 17.807; Be n.a.; Sc n.a.; Sr n.a.; Ti n.a.; Tl n.a.; W n.a.; Si n.a.; Fe 15.479; Ca 130.89; Al 6.3322; K 65.412; Mg 197.56; Na 14.071; . // Share of carbon in waste that is biogenic 100%. Share of metals in waste not oxidised and bulk-recyclable (exclude very small or thin parts) Iron: 0%; Alu: 0%; Copper: 0%. Overall degradability of waste during 100 years: 1.5%.

## Included activities start
from final waste deposition (without transports to the site)

## Included activities end
Waste-specific short-term emissions to air via landfill gas and landfill leachate. Waste-specific long-term emissions from landfill.

## Geography
Given name of landfill location is 'infiltration class 5 very wet (2018)'. Landfill site with mean annual temperature (MAT) of 8 degC, mean annual precipitation (MAP) of 1900 mm/year, and net infiltration of 1000 mm/year.
Climate adjustments result in an alpha t (temperature) for permafrost areas of 0.999. Total climate adjustments with alpha pt of 0.999.

## Technology
This is an inventory for an unsanitary, sub-controlled landfill for municipal solid waste. Ultimate average landfill height is 15 meters. Operation phase duration is 25 years.Percentage of landfill gas directly emitted is 100w%.
Leachate of the landfill is not treated. Based on average waste composition and climate data the end of carbonate phase is estimated to be reached 1733 years after waste deposition.

## Reference product
- waste wood, untreated: -1 kg; By-product classification Waste; CPC 3928: Sawdust and wood waste and scrap
  main reference product of this activity (supply of disposal service).
  production volume 1 kg
    The amount of the annual production volume is a placeholder value. The contribution of this technology to the different local markets can be found in the markets themselves.
  property heating value, net 13.99 MJ
    Value taken from the general comment of the treatment dataset.
  property price 0 EUR2005
    Waste products are assigned a price of zero as they are assumed to require further treatment.
  properties: aluminium content 7.6668e-6, arsenic content 5.111e-7, boron content 2.5556e-6, cadmium content 2.4277e-7, calcium content 0.00015848, carbon allocation 0.401463 kg, carbon content 0.48608, carbon content, non-fossil 0.48608, chlorine content 0.0004007, chromium content 7.9647e-7, cobalt content 1.0506e-7, copper content 5.0225e-6, dry mass 0.82592 kg, fluorine content 2.5555e-5, heating value, gross 15.365 MJ, hydrogen content 0.060736, iron content 1.8741e-5, lead content 3.3741e-5, magnesium content 0.0002392, manganese content 6.4314e-5, mercury content 3.8716e-7, molybdenum content 1.0052e-6, nickel content 6.7295e-7, nitrogen content 0.001195, oxygen content 0.45062, phosphorus content 0.00013193, potassium content 7.9199e-5, sodium content 1.7037e-5, sulfur content 0.00015197, water content 0.21077, water in wet mass 0.17408 kg, wet mass 1 kg, zinc content 2.156e-5

## Inputs from technosphere
- diesel, burned in building machine: 0.046738 MJ; lognormal variance with pedigree 0.088256, pedigree (1,1,4,1,1)
  for waste distribution and compaction.
  Uncertainty: Uncertainty calculated from uncertainty in base parameters.
  properties: heating value, net 1 MJ
- excavation, skid-steer loader: 0.00031708 m3; lognormal variance with pedigree 0.088256, pedigree (1,1,4,1,1)
  application of daily cover.
  Uncertainty: Uncertainty calculated from uncertainty in base parameters.

## Inputs from nature
- Occupation, dump site [natural resource, land]: 0.0023333 m2*year; lognormal variance with pedigree 0.088256, pedigree (1,1,4,1,1)
  for landfill operation phase and spontaneous renaturation.
  Uncertainty: Uncertainty calculated from uncertainty in base parameters.

## Emissions to nature
- Aluminium III [air, non-urban air or from high stacks]: 1.1856e-12 kg; lognormal variance with pedigree 0.78356, pedigree (1,1,4,1,1)
  burden from direct release or incineration of landfill biogas; or windblown leachate evaporite in arid climates.
  Uncertainty: Uncertainty calculated from unertainty of the waste composition of this waste, uncertainty in waste decomposition and short-term leaching in landfill
- Arsenic ion [air, non-urban air or from high stacks]: 1.5925e-11 kg; lognormal variance with pedigree 0.69931, pedigree (1,1,4,1,1)
  (same comment as for Aluminium III)
- Cadmium II [air, non-urban air or from high stacks]: 3.524e-12 kg; lognormal variance with pedigree 0.74833, pedigree (1,1,4,1,1)
  (same comment as for Aluminium III)
- Calcium [air, non-urban air or from high stacks]: 6.3835e-11 kg; lognormal variance with pedigree 0.6526, pedigree (1,1,4,1,1)
  (same comment as for Aluminium III)
- Carbon dioxide, non-fossil [air, non-urban air or from high stacks]: 0.0094319 kg; lognormal variance with pedigree 0.008, pedigree (1,1,4,1,1)
  burden from direct release or incineration of landfill biogas.
  Uncertainty: Uncertainty calculated from unertainty of the waste composition of this waste, uncertainty in waste decomposition and short-term leaching in landfill
- Chromium III [air, non-urban air or from high stacks]: 2.8085e-14 kg; lognormal variance with pedigree 0.90376, pedigree (1,1,4,1,1)
  (same comment as for Aluminium III)
- Cobalt II [air, non-urban air or from high stacks]: 1.0446e-13 kg; lognormal variance with pedigree 0.87245, pedigree (1,1,4,1,1)
  (same comment as for Aluminium III)
- Copper ion [air, non-urban air or from high stacks]: 8.6952e-14 kg; lognormal variance with pedigree 0.86583, pedigree (1,1,4,1,1)
  (same comment as for Aluminium III)
- Hydrochloric acid [air, non-urban air or from high stacks]: 1.7998e-7 kg; lognormal variance with pedigree 0.39273, pedigree (1,1,4,1,1)
  (same comment as for Aluminium III)
- Hydrogen fluoride [air, non-urban air or from high stacks]: 1.2605e-7 kg; lognormal variance with pedigree 0.40848, pedigree (1,1,4,1,1)
  (same comment as for Aluminium III)
- Iron ion [air, non-urban air or from high stacks]: 7.9632e-13 kg; lognormal variance with pedigree 0.79459, pedigree (1,1,4,1,1)
  (same comment as for Aluminium III)
- Lead II [air, non-urban air or from high stacks]: 8.2002e-13 kg; lognormal variance with pedigree 0.79242, pedigree (1,1,4,1,1)
  (same comment as for Aluminium III)
- Magnesium [air, non-urban air or from high stacks]: 4.5662e-10 kg; lognormal variance with pedigree 0.58873, pedigree (1,1,4,1,1)
  (same comment as for Aluminium III)
- Manganese II [air, non-urban air or from high stacks]: 2.2787e-10 kg; lognormal variance with pedigree 0.61227, pedigree (1,1,4,1,1)
  (same comment as for Aluminium III)
- Mercury II [air, non-urban air or from high stacks]: 1.3127e-10 kg; lognormal variance with pedigree 0.62933, pedigree (1,1,4,1,1)
  (same comment as for Aluminium III)
- Methane, non-fossil [air, non-urban air or from high stacks]: 0.0043565 kg; lognormal variance with pedigree 0.104996, pedigree (1,1,4,1,1)
  (same comment as for Carbon dioxide, non-fossil)
- Molybdenum VI [air, non-urban air or from high stacks]: 3.2792e-13 kg; lognormal variance with pedigree 0.82616, pedigree (1,1,4,1,1)
  (same comment as for Aluminium III)
- Nickel II [air, non-urban air or from high stacks]: 1.2103e-13 kg; lognormal variance with pedigree 0.85804, pedigree (1,1,4,1,1)
  (same comment as for Aluminium III)
- Nitrogen oxides [air, non-urban air or from high stacks]: 2.0281e-8 kg; lognormal variance with pedigree 0.31884, pedigree (1,1,4,1,1)
  (same comment as for Carbon dioxide, non-fossil)
- Potassium I [air, non-urban air or from high stacks]: 1.7913e-10 kg; lognormal variance with pedigree 0.61998, pedigree (1,1,4,1,1)
  (same comment as for Aluminium III)
- Sodium [air, non-urban air or from high stacks]: 2.1811e-10 kg; lognormal variance with pedigree 0.61421, pedigree (1,1,4,1,1)
  (same comment as for Aluminium III)
- Sulfur dioxide [air, non-urban air or from high stacks]: 2.454e-7 kg; lognormal variance with pedigree 0.40489, pedigree (1,1,4,1,1)
  (same comment as for Carbon dioxide, non-fossil)
- Zinc II [air, non-urban air or from high stacks]: 2.8085e-12 kg; lognormal variance with pedigree 0.75481, pedigree (1,1,4,1,1)
  (same comment as for Aluminium III)
- Heat, waste [soil, industrial]: 0.1327 MJ; lognormal variance with pedigree 0.085939, pedigree (1,1,4,1,1)
  burden from short-term decomposition of waste (0-100a).
  Uncertainty: Uncertainty calculated from unertainty of the waste composition of this waste, uncertainty in waste decomposition and short-term leaching in landfill
- Aluminium III [water, ground-]: 4.7423e-9 kg; lognormal variance with pedigree 0.51266, pedigree (1,1,4,1,1)
  burden from short-term leachate to groundwater in uncontrolled landfill in moist cimate.
  Uncertainty: Uncertainty calculated from unertainty of the waste composition of this waste, uncertainty in waste decomposition and short-term leaching in landfill
- Aluminium III [water, ground-, long-term]: 6.3274e-6 kg; lognormal variance with pedigree 0.34005, pedigree (1,1,4,1,1)
  Emissions from long-term leachate (>100a) directly from MSW landfill and indirectly via incineration of treatement sludge from leachate treatement.
  Uncertainty: Uncertainty calculated depending on waste input and uncertainty of long-term transfer coefficents in landfill.
- Ammonium [water, ground-]: 1.409e-5 kg; lognormal variance with pedigree 0.22855, pedigree (1,1,4,1,1)
  (same comment as for Aluminium III)
- Ammonium [water, ground-, long-term]: 0.00038738 kg; lognormal variance with pedigree 0.17286, pedigree (1,1,4,1,1)
  (same comment as for Aluminium III)
- Arsenic ion [water, ground-]: 1.136e-9 kg; lognormal variance with pedigree 0.55965, pedigree (1,1,4,1,1)
  (same comment as for Aluminium III)
- Arsenic ion [water, ground-, long-term]: 4.2098e-7 kg; lognormal variance with pedigree 0.42816, pedigree (1,1,4,1,1)
  (same comment as for Aluminium III)
- BOD5, Biological Oxygen Demand [water, ground-]: 4.5362e-5 kg; lognormal variance with pedigree 0.20411, pedigree (1,1,4,1,1)
  (same comment as for Aluminium III)
- BOD5, Biological Oxygen Demand [water, ground-, long-term]: 0.10239 kg; lognormal variance with pedigree 0.0138471, pedigree (1,1,4,1,1)
  (same comment as for Aluminium III)
- Boron [water, ground-]: 2.1278e-7 kg; lognormal variance with pedigree 0.40595, pedigree (1,1,4,1,1)
  (same comment as for Aluminium III)
- Boron [water, ground-, long-term]: 1.8979e-6 kg; lognormal variance with pedigree 0.37625, pedigree (1,1,4,1,1)
  (same comment as for Aluminium III)
- COD, Chemical Oxygen Demand [water, ground-]: 0.00019161 kg; lognormal variance with pedigree 0.20411, pedigree (1,1,4,1,1)
  (same comment as for Aluminium III)
- COD, Chemical Oxygen Demand [water, ground-, long-term]: 0.43253 kg; lognormal variance with pedigree 0.0138471, pedigree (1,1,4,1,1)
  (same comment as for Aluminium III)
- Cadmium II [water, ground-]: 5.286e-10 kg; lognormal variance with pedigree 0.58408, pedigree (1,1,4,1,1)
  (same comment as for Aluminium III)
- Cadmium II [water, ground-, long-term]: 1.9998e-7 kg; lognormal variance with pedigree 0.45194, pedigree (1,1,4,1,1)
  (same comment as for Aluminium III)
- Calcium II [water, ground-]: 2.5534e-7 kg; lognormal variance with pedigree 0.38126, pedigree (1,1,4,1,1)
  (same comment as for Aluminium III)
- Calcium II [water, ground-, long-term]: 0.00013063 kg; lognormal variance with pedigree 0.23955, pedigree (1,1,4,1,1)
  (same comment as for Aluminium III)
- Chloride [water, ground-]: 1.2486e-5 kg; lognormal variance with pedigree 0.26251, pedigree (1,1,4,1,1)
  (same comment as for Aluminium III)
- Chloride [water, ground-, long-term]: 0.00031829 kg; lognormal variance with pedigree 0.2088, pedigree (1,1,4,1,1)
  (same comment as for Aluminium III)
- Chromium VI [water, ground-]: 1.1234e-10 kg; lognormal variance with pedigree 0.63507, pedigree (1,1,4,1,1)
  (same comment as for Aluminium III)
- Chromium VI [water, ground-, long-term]: 1.2765e-9 kg; lognormal variance with pedigree 2.8512, pedigree (1,1,4,1,1)
  (same comment as for Aluminium III)
- Cobalt II [water, ground-]: 4.1786e-10 kg; lognormal variance with pedigree 0.60175, pedigree (1,1,4,1,1)
  (same comment as for Aluminium III)
- Cobalt II [water, ground-, long-term]: 8.6354e-8 kg; lognormal variance with pedigree 0.48845, pedigree (1,1,4,1,1)
  (same comment as for Aluminium III)
- Copper ion [water, ground-]: 3.0433e-10 kg; lognormal variance with pedigree 0.6031, pedigree (1,1,4,1,1)
  (same comment as for Aluminium III)
- Copper ion [water, ground-, long-term]: 4.1478e-6 kg; lognormal variance with pedigree 0.35396, pedigree (1,1,4,1,1)
  (same comment as for Aluminium III)
- DOC, Dissolved Organic Carbon [water, ground-]: 0.00017519 kg; lognormal variance with pedigree 0.20411, pedigree (1,1,4,1,1)
  (same comment as for Aluminium III)
- DOC, Dissolved Organic Carbon [water, ground-, long-term]: 0.39545 kg; lognormal variance with pedigree 0.0138471, pedigree (1,1,4,1,1)
  (same comment as for Aluminium III)
- Fluoride [water, ground-]: 2.3231e-8 kg; lognormal variance with pedigree 0.46034, pedigree (1,1,4,1,1)
  (same comment as for Aluminium III)
- Fluoride [water, ground-, long-term]: 2.0964e-5 kg; lognormal variance with pedigree 0.30024, pedigree (1,1,4,1,1)
  (same comment as for Aluminium III)
- Heat, waste [water, ground-, long-term]: 15.134 MJ; lognormal variance with pedigree 0.020755, pedigree (1,1,4,1,1)
  burden from long-term decomposition of waste (>100a).
  Uncertainty: Uncertainty calculated from unertainty of the waste composition of this waste, uncertainty in waste decomposition and short-term leaching in landfill
- Hydrogen sulfide [water, ground-]: 5.101e-8 kg; lognormal variance with pedigree 0.3497, pedigree (1,1,4,1,1)
  (same comment as for Aluminium III)
- Hydrogen sulfide [water, ground-, long-term]: 9.0826e-6 kg; lognormal variance with pedigree 0.24095, pedigree (1,1,4,1,1)
  (same comment as for Aluminium III)
- Iron ion [water, ground-]: 3.1853e-9 kg; lognormal variance with pedigree 0.52554, pedigree (1,1,4,1,1)
  (same comment as for Aluminium III)
- Iron ion [water, ground-, long-term]: 1.5475e-5 kg; lognormal variance with pedigree 0.31052, pedigree (1,1,4,1,1)
  (same comment as for Aluminium III)
- Lead II [water, ground-]: 2.4601e-9 kg; lognormal variance with pedigree 0.53403, pedigree (1,1,4,1,1)
  (same comment as for Aluminium III)
- Lead II [water, ground-, long-term]: 2.7865e-5 kg; lognormal variance with pedigree 0.29101, pedigree (1,1,4,1,1)
  (same comment as for Aluminium III)
- Magnesium [water, ground-]: 1.8265e-6 kg; lognormal variance with pedigree 0.31933, pedigree (1,1,4,1,1)
  (same comment as for Aluminium III)
- Magnesium [water, ground-, long-term]: 0.00019573 kg; lognormal variance with pedigree 0.22587, pedigree (1,1,4,1,1)
  (same comment as for Aluminium III)
- Manganese II [water, ground-]: 9.1146e-7 kg; lognormal variance with pedigree 0.34495, pedigree (1,1,4,1,1)
  (same comment as for Aluminium III)
- Manganese II [water, ground-, long-term]: 5.2207e-5 kg; lognormal variance with pedigree 0.26957, pedigree (1,1,4,1,1)
  (same comment as for Aluminium III)
- Mercury II [water, ground-]: 3.2817e-10 kg; lognormal variance with pedigree 0.59942, pedigree (1,1,4,1,1)
  (same comment as for Aluminium III)
- Mercury II [water, ground-, long-term]: 3.193e-7 kg; lognormal variance with pedigree 0.43705, pedigree (1,1,4,1,1)
  (same comment as for Aluminium III)
- Molybdenum VI [water, ground-]: 1.3117e-9 kg; lognormal variance with pedigree 0.55483, pedigree (1,1,4,1,1)
  (same comment as for Aluminium III)
- Molybdenum VI [water, ground-, long-term]: 1.6046e-7 kg; lognormal variance with pedigree 0.57515, pedigree (1,1,4,1,1)
  (same comment as for Aluminium III)
- Nickel II [water, ground-]: 4.8412e-10 kg; lognormal variance with pedigree 0.58701, pedigree (1,1,4,1,1)
  (same comment as for Aluminium III)
- Nickel II [water, ground-, long-term]: 5.5532e-7 kg; lognormal variance with pedigree 0.41932, pedigree (1,1,4,1,1)
  (same comment as for Aluminium III)
- Nitrate [water, ground-]: 1.4818e-6 kg; lognormal variance with pedigree 0.22855, pedigree (1,1,4,1,1)
  (same comment as for Aluminium III)
- Nitrate [water, ground-, long-term]: 4.0739e-5 kg; lognormal variance with pedigree 0.17286, pedigree (1,1,4,1,1)
  (same comment as for Aluminium III)
- Nitrite [water, ground-]: 7.6686e-7 kg; lognormal variance with pedigree 0.22855, pedigree (1,1,4,1,1)
  (same comment as for Aluminium III)
- Nitrite [water, ground-, long-term]: 2.1084e-5 kg; lognormal variance with pedigree 0.17286, pedigree (1,1,4,1,1)
  (same comment as for Aluminium III)
- Nitrogen, organic bound [water, ground-]: 2.3029e-5 kg; lognormal variance with pedigree 0.22855, pedigree (1,1,4,1,1)
  (same comment as for Aluminium III)
- Nitrogen, organic bound [water, ground-, long-term]: 0.00063314 kg; lognormal variance with pedigree 0.17286, pedigree (1,1,4,1,1)
  (same comment as for Aluminium III)
- Phosphate [water, ground-]: 2.7975e-7 kg; lognormal variance with pedigree 0.41461, pedigree (1,1,4,1,1)
  (same comment as for Aluminium III)
- Phosphate [water, ground-, long-term]: 2.2436e-5 kg; lognormal variance with pedigree 0.70131, pedigree (1,1,4,1,1)
  (same comment as for Aluminium III)
- Potassium I [water, ground-]: 7.1651e-7 kg; lognormal variance with pedigree 0.35106, pedigree (1,1,4,1,1)
  (same comment as for Aluminium III)
- Potassium I [water, ground-, long-term]: 6.4695e-5 kg; lognormal variance with pedigree 0.26264, pedigree (1,1,4,1,1)
  (same comment as for Aluminium III)
- Sodium I [water, ground-]: 8.7244e-7 kg; lognormal variance with pedigree 0.35485, pedigree (1,1,4,1,1)
  (same comment as for Aluminium III)
- Sodium I [water, ground-, long-term]: 1.3199e-5 kg; lognormal variance with pedigree 0.31376, pedigree (1,1,4,1,1)
  (same comment as for Aluminium III)
- Sulfate [water, ground-]: 1.9568e-6 kg; lognormal variance with pedigree 0.3497, pedigree (1,1,4,1,1)
  (same comment as for Aluminium III)
- Sulfate [water, ground-, long-term]: 0.00034843 kg; lognormal variance with pedigree 0.24095, pedigree (1,1,4,1,1)
  (same comment as for Aluminium III)
- TOC, Total Organic Carbon [water, ground-]: 0.00017519 kg; lognormal variance with pedigree 0.20411, pedigree (1,1,4,1,1)
  (same comment as for Aluminium III)
- TOC, Total Organic Carbon [water, ground-, long-term]: 0.39545 kg; lognormal variance with pedigree 0.0138471, pedigree (1,1,4,1,1)
  (same comment as for Aluminium III)
- Zinc II [water, ground-]: 1.2638e-8 kg; lognormal variance with pedigree 0.48024, pedigree (1,1,4,1,1)
  (same comment as for Aluminium III)
- Zinc II [water, ground-, long-term]: 1.7794e-5 kg; lognormal variance with pedigree 0.30588, pedigree (1,1,4,1,1)
  (same comment as for Aluminium III)
