# planing, lath, hardwood, u=10%

Dataset: EcoSpold 2, unit process
Geography: CH
Time period: 2011-01-01 to 2022-12-31
Technology level: current
Classification: ISIC rev.4 ecoinvent: 1610:Sawmilling and planing of wood
Tags: Swiss brush-up completed
Scenario: Business-as-Usual
System model: Allocation at the point of substitution
Share of production covered: 100 %
Generated by: Frank Werner
Published in: BFS 2013
Database: ecoinvent
isCopyrightProtected: true

## General comment
This dataset represents the planing of one m3 air dried hardwood lath that has been kiln dried to 10% moisture content. The planing mill is assumed to be located on the sawmill site. The suction of the shavings is modeled in a separate activity.
The data was provided by and approved by the Swiss forest industry (Holzindustrie Schweiz HIS).
Within ecoinvent, three products - boards, beams and laths - are distinguished:

## Included activities start
Planing process starting from kiln dried hardwood lath with a moisture content of 10%, at sawmill site.

## Included activities end
This activity ends with planed hardwood lath, at plant. The dataset includes the planing process at the sawmill site and input of wood. The dataset does not include dust emissions.

## Geography
Represents average Swiss conditions.

## Parameters
- moisture content lath: 10 dimensionless; name moisture_lath
  moisture content of lath
- share of lath: 87 dimensionless; name share_lath
  share of lath production from volume of sawnwood input
- share of shaving: 13 dimensionless; name share_shaving
  share of shaving production from volume of sawnwood input
- shrinkage ratio (u=30% - 0%): 0.004 dimensionless; name shrinkage_ratio
  shrinkage of volume in % per change (%) in moisture content, relevant between u=30% to 0%
- wood density, apparent: 675.84 kg/m3; name wood_d_apparent; = (1+moisture_lath/100)* basic_wood_d
  kg wet matter/wet volume
- wood density, basic: 614.4 kg/m3; name basic_wood_d; = dry_wood_d*(1-moisture_lath*shrinkage_ratio)
  kg oven-dry matter/wet volume
- wood density, dry: 640 kg/m3; name dry_wood_d
  kg oven-dry matter/oven-dry volume

## Reference product
- sawnwood, lath, hardwood, dried (u=10%), planed: 1 m3; name lath_planed; source BFS 2013; By-product classification allocatable product; CPC 31102: Wood, sawn or chipped lengthwise, sliced or peeled, of a thickness exceeding 6 mm, of non-coniferous wood
  production volume 5362.37 m3
    estimated to be 50% of respective (kiln dried) sawn timber product
  property dry mass 614.4 kg; = basic_wood_d
  property heating value, net 9045.69 MJ
    LHV is calculated based on the Carbon content of the product. More details can be found on the respective documentation.The property is based on a value of 13.38MJ/kg
  property price 265 EUR2005
    Expert judgement (Urs Luginbühl, Swiss Sawmilling industry, personal communication in June 2014). Cross-reference; FAOSTAT (accessed 20140428). The price is calculated by using data on total world import quantity (m3) and import value (1000 USD), year 2005. 25656806 m3 of Sawnwood (NC) - coniferous was imported in the world in 2005. The import value was 9652714000 USD. The calculated price is thus (9652714000/25656806=376*0.8=) 303 Euro.
  property water content 0.1; = moisture_lath/100
  property water in wet mass 61.44 kg; = basic_wood_d*moisture_lath/100
  property wet mass 675.84 kg; = basic_wood_d*(1+moisture_lath/100)
  properties: carbon allocation 303.514 kg, carbon content 0.494, carbon content, fossil 0, carbon content, non-fossil 0.494

## Inputs from technosphere
- electricity, medium voltage: 21.4599 kWh; name elec_medvol; source BFS 2013; lognormal variance with pedigree 0.0336, pedigree (2,1,4,1,1)
  electricity consumed for the planing; the suction of the shavings in covered in a separate dataset; data from Swiss industry
  properties: UVEK_link_1 1710, UVEK_relative_amount_1 1
  note on UVEK_link_1: to be used only in special submissions in coordination with ecoinvent and the Swiss FOEN
- planing mill: 6.81819e-7 unit; name planemill; source BFS 2013; lognormal variance with pedigree 0.5586, pedigree (2,1,4,1,1)
  data taken from ecoinvent 2.2 dataset; source: Werner, F., T. Künniger, H.-J. Althaus and K. Richter (2007): Life cycle inventories of wood as fuel and construction material, Duebendorf, November 2002. Centre for life cycle inventories in the ETH domain, Duebendorf.
  properties: UVEK_link_1 3514, UVEK_relative_amount_1 1
- sawnwood, lath, hardwood, raw, dried (u=10%): 1.10612 m3; name lath_raw_u10; = 1/(1-share_shaving/100); source BFS 2013; lognormal variance with pedigree 0.033, pedigree (1,1,4,1,1)
  input of raw sawn wood to be planed; usually processes within the sawmill that produces the raw sawn wood
  property carbon content, non-fossil 0.494; name lath_raw_C_content_non_fossil
  property dry mass 614.4 kg; name lath_raw_DM; = basic_wood_d
  property water content 0.1; name lath_raw_water_content
  property water in wet mass 61.44 kg; name lath_raw_WWM; = lath_raw_DM* lath_raw_water_content
  property wet mass 675.84 kg; name lath_raw_WM; = lath_raw_DM*(1+ lath_raw_water_content)
  properties: heating value, net 9045.69 MJ
- shavings, hardwood, loose, measured as dry mass: -88.3483 kg; name m_shavings; = lath_raw_u10* share_shaving/100* basic_wood_d; source BFS 2013; lognormal variance with pedigree 0.025, pedigree (1,1,1,1,1)
  calculated as dry mass
  production volume
    Calculated from production volume of reference product using the relative outputs.
  properties: carbon content, non-fossil 0.494, dry mass 1 kg, heating value, net 12.61 MJ, price 0.113 EUR2005, water content 0.15, wet mass 1.15 kg

## Sampling procedure
complementary literature and sampling from sawmills
