# treatment of waste graphical paper, municipal incineration

Dataset: EcoSpold 2, unit process
Geography: CH
Time period: 1994-01-01 to 2022-12-31
Technology level: outdated
Classification: ISIC rev.4 ecoinvent: 3821:Treatment and disposal of non-hazardous waste
Classification: EcoSpold01Categories: waste management/municipal incineration
Tags: Treatment
Scenario: Business-as-Usual
System model: Allocation at the point of substitution
Generated by: Gabor Doka (obsolete)
Database: ecoinvent
isCopyrightProtected: true

## General comment
Proxy dataset for municipal incineration of waste graphical paper, generated as a copy of a previous dataset for "average paper", by Gabor Doka, with only adjustment of the uncertainty DQI. Upper heating value of waste: 16.61 MJ/kg; lower heating value: 14.12 MJ/kg. Waste composition (wet, in ppm): H2O 110830; O 378670; H 53852; C 404000; S 1406.7; N 3756.6; P 112.95; B 17.19; Cl 1837.5; Br n.a.; F 19.468; I n.a.; Ag 0.047733; As 2.0485; Ba 114.24; Cd 1.6629; Co 0.7359; Cr 14.461; Cu 60.893; Hg 0.13902; Mn 40.221; Mo 4.2976; Ni 9.4431; Pb 80.374; Sb 0.70911; Se 2.5786; Sn n.a.; V n.a.; Zn 124.8; Be 0.97413; Sc n.a.; Sr 58.276; Ti 171.9; Tl 1.719; W n.a.; Si 21255; Fe 1188.4; Ca 3438.1; Al 12391; K 1327.5; Mg 4297.6; Na 918.83;
Share of carbon in waste that is biogenic 100%.
Share of iron in waste that is metallic/recyclable 0%.
Net energy produced in MSWI: 1.32MJ/kg waste electric energy and 2.77MJ/kg waste thermal energy. One kg of this waste produces 0.07875 kg of slag and 0.01249 kg of residues, which are landfilled. Additional solidification with 0.004996 kg of cement.
This is a dataset copied from a dataset from ecoSpold v1 / ecoinvent database version 2. It may not in all aspects fulfill the requirements of the ecoinvent data quality guideline for version 3.

## Included activities end
waste-specific air and water emisions from incineration, auxiliary material consumption for flue gas cleaning. Short-term emissions to river water and long-term emisisons to ground water from slag compartment (from bottom slag) and residual material landfill (from solidified fly ashes and scrubber sludge). Process energy demands for MSWI.

## Geography
Specific to the technology mix encountered in Switzerland in 2000. Well applicable to modern incineration practices in Europe, North America or Japan.

## Technology
replaced by newer incineration technology with fly ash extraction. Average Swiss MSWI plants in 2000 with electrostatic precipitator for fly ash (ESP), wet flue gas scrubber and 29.4% SNCR , 32.2% SCR-high dust , 24.6% SCR-low dust -DeNOx facilities and 13.8% without Denox (by burnt waste, according to Swiss average). Share of waste incinerated in plants with magnetic scrap separation from slag : 50%. Gross electric efficiency technology mix 12.997% and Gross thermal efficiency technology mix 25.57%

## Time period
Waste composition as given in literature reference, theoretical data or other source. Transfer coefficients for modern Swiss MSWI. Emission speciation based on early 90ies data.

## Reference product
- waste graphical paper: -1 kg; name RP_amount_1; By-product classification Waste; CPC 39990: Other wastes n.e.c.
  EcoSpold01Location=CH
  production volume 0 kg
    outdated. Replaced by newer incineration technology with fly ash extraction
  property heating value, net 14.12 MJ
    Value taken from the general comment of the treatment dataset.
  property price 0 EUR2005
    Waste products are assigned a price of zero as they are assumed to require further treatment.
  properties: carbon allocation 0.404 kg, carbon content 0.454955, carbon content, fossil 0, carbon content, non-fossil 0.454955, dry mass 0.888 kg, water content 0.126126, water in wet mass 0.112 kg, wet mass 1 kg

## Inputs from technosphere
- ammonia, anhydrous, liquid: 0.00019 kg; lognormal variance with pedigree 1.48, pedigree (1,1,5,1,4)
  EcoSpold01Location=CH
  uncertainty calculated from uncertainty in average DeNOx input, uncertainty in the share of thermal NOx, uncertainty of nitrogen content in average municipal waste and the unertainty in nitrogen content in *this* waste.
  properties: dry mass 1 kg, wet mass 1 kg
- cement, unspecified: 0.005 kg; lognormal variance with pedigree 0.11, pedigree (1,1,5,1,4)
  Cement for solidification of landfilled residual material. Uncertainty calculated from unertainty of the waste composition of this waste, of transfer coefficients in the incinerator and of the solidification recipe.
  EcoSpold01Location=CH
  properties: dry mass 1 kg, wet mass 1 kg
- chemical, inorganic: 7.41e-6 kg; lognormal variance with pedigree 0.41, pedigree (1,1,5,1,1)
  Proxy for Polyelectrolyte. uncertainty calculated from uncertainty in average auxiliary material input, and the unertainty of the waste composition of this waste
  EcoSpold01Location=GLO
  properties: carbon content, fossil 0.003, dry mass 1 kg, wet mass 1 kg
  note on carbon content, fossil: This dataset is an unweighted average of 20 inorganic substances (listed in Tab 88.1, ecoinvent v2.2 report 8, part II), being part of the top100 chemicals included in this database. The C-content has also been calculated as an unweighted average of the C content of the substances composing this dataset.
- chemical, organic: 6.92e-6 kg; lognormal variance with pedigree 1.52, pedigree (1,1,5,1,4)
  EcoSpold01Location=GLO
  Proxy for TMT15. uncertainty calculated from uncertainty in average auxiliary material input, and the unertainty of the waste composition of this waste
  properties: carbon content, fossil 0.628, dry mass 1 kg, heating value, net 19.03 MJ, wet mass 1 kg
  note on carbon content, fossil: This dataset is an unweighted average of 20 organic substances (listed in Tab 88.1, ecoinvent v2.2 report 8, part II), being part of the top100 chemicals included in this database. The C-content has also been calculated as an unweighted average of the C content of the substances composing this dataset.
- chromium oxide, flakes: 1.11e-7 kg; lognormal variance with pedigree 2.19, pedigree (1,1,5,1,4)
  EcoSpold01Location=RER
  Proxy for vanadium pentoxide V2O5 in SCR catalyst, uncertainty calculated from uncertainty in average DeNOx input, uncertainty in the share of thermal NOx, uncertainty of nitrogen content in average municipal waste and the unertainty in nitrogen content in *this* waste.
  properties: dry mass 1 kg, wet mass 1 kg
- heat, district or industrial, natural gas: 0.01665 MJ; lognormal variance with pedigree 1.44, pedigree (1,1,5,1,1)
  EcoSpold01Location=RER
  uncertainty calculated from uncertainty in average DeNOx input, uncertainty in the share of thermal NOx, uncertainty of nitrogen content in average municipal waste and the unertainty in nitrogen content in *this* waste.
  properties: heating value, net 1 MJ
- hydrochloric acid, without water, in 30% solution state: 4.45e-6 kg; lognormal variance with pedigree 0.41, pedigree (1,1,5,1,1)
  EcoSpold01Location=RER
  uncertainty calculated from uncertainty in average auxiliary material input, and the unertainty of the waste composition of this waste
  properties: dry mass 1 kg, heating value, net 3.32 MJ, wet mass 1 kg
- iron (III) chloride, without water, in 40% solution state: 1.92e-5 kg; lognormal variance with pedigree 0.65, pedigree (1,1,5,1,4)
  uncertainty calculated from uncertainty in average auxiliary material input, and the unertainty of the waste composition of this waste
  EcoSpold01Location=CH
  properties: dry mass 1 kg, wet mass 1 kg
- municipal waste incineration facility: 2.5e-10 unit; lognormal variance with pedigree 0.08, pedigree (1,1,5,1,4)
  EcoSpold01Location=CH
  demands per kilogram waste. uncertainty is heeded in the module
- process-specific burdens, municipal waste incineration: 1 kg; lognormal variance with pedigree 0.04, pedigree (1,1,5,1,1)
  EcoSpold01Location=CH
  demands per kilogram waste. uncertainty is heeded in the module;activityLink introduced to establish a direct link to the corresponding regional supply of this product
- process-specific burdens, residual material landfill: 0.0125 kg; lognormal variance with pedigree 0.06, pedigree (1,1,5,1,1)
  uncertainty is calculated from uncertainties in waste composition and transfer coefficients in incinerator;activityLink introduced to establish a direct link to the corresponding regional supply of this product
  EcoSpold01Location=CH
- process-specific burdens, slag landfill: 0.0788 kg; lognormal variance with pedigree 0.08, pedigree (1,1,5,1,1)
  (same comment as for process-specific burdens, residual material landfill)
- quicklime, milled, packed: 0.000319 kg; lognormal variance with pedigree 0.66, pedigree (1,1,5,1,4)
  (same comment as for iron (III) chloride, without water, in 40% solution state)
  properties: dry mass 0.99 kg, water content 0.010101, wet mass 1 kg
- residual material landfill: 2.6e-11 unit; lognormal variance with pedigree 0.06, pedigree (1,1,5,1,1)
  EcoSpold01Location=CH
  uncertainty is calculated from uncertainties in waste composition and transfer coefficients in incinerator
- slag landfill: 1.4e-10 unit; lognormal variance with pedigree 0.12, pedigree (1,1,5,1,4)
  (same comment as for residual material landfill)
- sodium hydroxide, without water, in 50% solution state: 0.00232 kg; lognormal variance with pedigree 0.45, pedigree (1,1,5,1,1)
  uncertainty calculated from uncertainty in average auxiliary material input, and the unertainty of the waste composition of this waste
  EcoSpold01Location=RER
  properties: dry mass 1 kg, heating value, net 3.03 MJ, wet mass 1 kg
- titanium dioxide: 5.42e-6 kg; lognormal variance with pedigree 2.19, pedigree (1,1,5,1,4)
  uncertainty calculated from uncertainty in average DeNOx input, uncertainty in the share of thermal NOx, uncertainty of nitrogen content in average municipal waste and the unertainty in nitrogen content in *this* waste.
  EcoSpold01Location=RER
  properties: dry mass 1 kg, wet mass 1 kg
- waste cement, hydrated: -0.0125 kg; name BP_amount_1; lognormal variance with pedigree 0.07, pedigree (1,1,1,1,4)
  EcoSpold01Location=CH
  Hydrated cement for solidification of landfilled residual material. Uncertainty calculated from unertainty of the waste composition of this waste and transfer coefficients in the incinerator and of the solidification recipe.
  production volume
    Calculated from the production volume of waste paper, 11.2% water in proportion to the respective output amounts.
  properties: dry mass 1 kg, wet mass 1 kg

## Emissions to nature
- Aluminium III [air, urban air close to ground]: 1.94e-5 kg; lognormal variance with pedigree 0.44, pedigree (1,1,5,1,4)
  uncertainty is calculated from uncertainties in waste composition and transfer coefficients in incinerator
- Ammonia [air, urban air close to ground]: 2.98e-6 kg; lognormal variance with pedigree 1.59, pedigree (1,1,5,1,4)
  uncertainty calculated from uncertainty in average N-emissions, uncertainty in the share of thermal NOx, uncertainty of nitrogen content in average municipal waste and the unertainty in nitrogen content in *this* waste.
- Antimony ion [air, urban air close to ground]: 2.76e-15 kg; lognormal variance with pedigree 1.82, pedigree (1,1,5,1,4)
  (same comment as for Aluminium III)
- Arsenic ion [air, urban air close to ground]: 2.09e-14 kg; lognormal variance with pedigree 1.67, pedigree (1,1,5,1,4)
  (same comment as for Aluminium III)
- Barium II [air, urban air close to ground]: 1.14e-7 kg; lognormal variance with pedigree 1, pedigree (1,1,5,1,1)
  (same comment as for Aluminium III)
- Beryllium II [air, urban air close to ground]: 9.74e-10 kg; lognormal variance with pedigree 1.67, pedigree (1,1,5,1,4)
  (same comment as for Aluminium III)
- Boron [air, urban air close to ground]: 2.06e-6 kg; lognormal variance with pedigree 1.28, pedigree (1,1,5,1,4)
  (same comment as for Aluminium III)
- Cadmium II [air, urban air close to ground]: 9.16e-11 kg; lognormal variance with pedigree 1.62, pedigree (1,1,5,1,4)
  (same comment as for Aluminium III)
- Calcium [air, urban air close to ground]: 5.73e-6 kg; lognormal variance with pedigree 0.59, pedigree (1,1,5,1,4)
  (same comment as for Aluminium III)
- Carbon dioxide, non-fossil [air, urban air close to ground]: 1.46 kg; lognormal variance with pedigree 0.1, pedigree (1,1,5,1,4)
  (same comment as for Aluminium III)
- Carbon monoxide, non-fossil [air, urban air close to ground]: 0.000223 kg; lognormal variance with pedigree 0.690625, pedigree (1,3,5,2,1)
  Literature data from switzerland and germany adapted to plant age distribution in switzerland
  Uncertainty: & basic uncertainty of 5; literature data from switzerland and germany adapted to plant age distribution in switzerland
- Chromium III [air, urban air close to ground]: 1.07e-12 kg; lognormal variance with pedigree 1.4, pedigree (1,1,5,1,4)
  (same comment as for Aluminium III)
- Cobalt II [air, urban air close to ground]: 2.34e-14 kg; lognormal variance with pedigree 1.79, pedigree (1,1,5,1,4)
  (same comment as for Aluminium III)
- Copper ion [air, urban air close to ground]: 4.5e-10 kg; lognormal variance with pedigree 1.16, pedigree (1,1,5,1,4)
  (same comment as for Aluminium III)
- Cyanide [air, urban air close to ground]: 3.38e-6 kg; lognormal variance with pedigree 1.59, pedigree (1,1,5,1,4)
  (same comment as for Ammonia)
- Dinitrogen monoxide [air, urban air close to ground]: 1.59e-5 kg; lognormal variance with pedigree 1.59, pedigree (1,1,5,1,4)
  (same comment as for Ammonia)
- Hydrochloric acid [air, urban air close to ground]: 2.04e-8 kg; lognormal variance with pedigree 0.71, pedigree (1,1,5,1,4)
  (same comment as for Aluminium III)
- Hydrogen fluoride [air, urban air close to ground]: 1.02e-8 kg; lognormal variance with pedigree 1.28, pedigree (1,1,5,1,4)
  (same comment as for Aluminium III)
- Iron ion [air, urban air close to ground]: 3.97e-8 kg; lognormal variance with pedigree 0.76, pedigree (1,1,5,1,4)
  (same comment as for Aluminium III)
- Lead II [air, urban air close to ground]: 2.98e-9 kg; lognormal variance with pedigree 1.07, pedigree (1,1,5,1,1)
  (same comment as for Aluminium III)
- Magnesium [air, urban air close to ground]: 5.92e-6 kg; lognormal variance with pedigree 0.57, pedigree (1,1,5,1,4)
  (same comment as for Aluminium III)
- Manganese II [air, urban air close to ground]: 2.19e-13 kg; lognormal variance with pedigree 1.29, pedigree (1,1,5,1,4)
  (same comment as for Aluminium III)
- Mercury II [air, urban air close to ground]: 4.8e-15 kg; lognormal variance with pedigree 2, pedigree (1,1,5,1,4)
  (same comment as for Aluminium III)
- Methane, non-fossil [air, urban air close to ground]: 6.38e-6 kg; lognormal variance with pedigree 0.131225, pedigree (2,3,5,2,4)
  Confidential data from 5 plants in Switzerland and Germany
  Uncertainty: confidential data from 5 plants in Switzerland and Germany
- Molybdenum VI [air, urban air close to ground]: 8.6e-9 kg; lognormal variance with pedigree 1.47, pedigree (1,1,5,1,4)
  (same comment as for Aluminium III)
- Nickel II [air, urban air close to ground]: 4.08e-13 kg; lognormal variance with pedigree 1.45, pedigree (1,1,5,1,4)
  (same comment as for Aluminium III)
- Nitrogen oxides [air, urban air close to ground]: 0.00012 kg; lognormal variance with pedigree 1.59, pedigree (1,1,5,1,4)
  (same comment as for Ammonia)
- Phosphorus [air, urban air close to ground]: 1.13e-7 kg; lognormal variance with pedigree 1.04, pedigree (1,1,5,1,4)
  (same comment as for Aluminium III)
- Potassium I [air, urban air close to ground]: 4e-6 kg; lognormal variance with pedigree 0.72, pedigree (1,1,5,1,4)
  (same comment as for Aluminium III)
- Selenium IV [air, urban air close to ground]: 1.3e-14 kg; lognormal variance with pedigree 1.64, pedigree (1,1,5,1,4)
  (same comment as for Aluminium III)
- Silicon [air, urban air close to ground]: 4.95e-5 kg; lognormal variance with pedigree 0.37, pedigree (1,1,5,1,4)
  (same comment as for Aluminium III)
- Silver I [air, urban air close to ground]: 6.2e-13 kg; lognormal variance with pedigree 2.01, pedigree (1,1,5,1,1)
  (same comment as for Aluminium III)
- Sodium [air, urban air close to ground]: 8.65e-6 kg; lognormal variance with pedigree 0.76, pedigree (1,1,5,1,4)
  (same comment as for Aluminium III)
- Strontium [air, urban air close to ground]: 5.83e-9 kg; lognormal variance with pedigree 1.15, pedigree (1,1,5,1,4)
  (same comment as for Aluminium III)
- Sulfur dioxide [air, urban air close to ground]: 5.99e-6 kg; lognormal variance with pedigree 0.71, pedigree (1,1,5,1,4)
  (same comment as for Aluminium III)
- Thallium I [air, urban air close to ground]: 1.72e-9 kg; lognormal variance with pedigree 1.6, pedigree (1,1,5,1,4)
  (same comment as for Aluminium III)
- Titanium ion [air, urban air close to ground]: 1.72e-7 kg; lognormal variance with pedigree 0.99, pedigree (1,1,5,1,4)
  (same comment as for Aluminium III)
- Zinc II [air, urban air close to ground]: 2.04e-9 kg; lognormal variance with pedigree 1.06, pedigree (1,1,5,1,4)
  (same comment as for Aluminium III)
- Aluminium III [water, ground-, long-term]: 0.00917 kg; lognormal variance with pedigree 0.4, pedigree (1,1,5,1,4)
  Long-term emissions from landfilling of incineration residues. uncertainty is calculated from uncertainties in waste composition and transfer coefficients in incinerator and landfills.
- Aluminium III [water, surface water]: 1.03e-6 kg; lognormal variance with pedigree 0.85, pedigree (1,1,5,1,1)
  uncertainty is calculated from uncertainties in waste composition and transfer coefficients in incinerator and landfills
- Antimony ion [water, ground-, long-term]: 4.53e-7 kg; lognormal variance with pedigree 1.44, pedigree (1,1,5,1,4)
  (same comment as for Aluminium III)
- Antimony ion [water, surface water]: 2.46e-7 kg; lognormal variance with pedigree 1.46, pedigree (1,1,5,1,4)
  (same comment as for Aluminium III)
- Arsenic ion [water, ground-, long-term]: 1.12e-6 kg; lognormal variance with pedigree 1.56, pedigree (1,1,5,1,4)
  (same comment as for Aluminium III)
- Arsenic ion [water, surface water]: 9.24e-7 kg; lognormal variance with pedigree 1.28, pedigree (1,1,5,1,1)
  (same comment as for Aluminium III)
- BOD5, Biological Oxygen Demand [water, ground-, long-term]: 0.00326 kg; lognormal variance with pedigree 0.06, pedigree (1,1,5,1,1)
  (same comment as for Aluminium III)
- BOD5, Biological Oxygen Demand [water, surface water]: 1.51e-5 kg; lognormal variance with pedigree 0.21, pedigree (1,1,5,1,4)
  (same comment as for Aluminium III)
- Barium II [water, ground-, long-term]: 0.000101 kg; lognormal variance with pedigree 1.07, pedigree (1,1,5,1,4)
  (same comment as for Aluminium III)
- Barium II [water, surface water]: 1.57e-8 kg; lognormal variance with pedigree 1.9, pedigree (1,1,5,1,4)
  (same comment as for Aluminium III)
- Beryllium II [water, ground-, long-term]: 7.85e-7 kg; lognormal variance with pedigree 1.4, pedigree (1,1,5,1,1)
  (same comment as for Aluminium III)
- Beryllium II [water, surface water]: 6.05e-10 kg; lognormal variance with pedigree 1.9, pedigree (1,1,5,1,4)
  (same comment as for Aluminium III)
- Boron [water, ground-, long-term]: 1.13e-5 kg; lognormal variance with pedigree 0.69, pedigree (1,1,5,1,1)
  (same comment as for Aluminium III)
- Boron [water, surface water]: 2.69e-6 kg; lognormal variance with pedigree 1.22, pedigree (1,1,5,1,4)
  (same comment as for Aluminium III)
- COD, Chemical Oxygen Demand [water, ground-, long-term]: 0.00997 kg; lognormal variance with pedigree 0.1, pedigree (1,1,5,1,4)
  (same comment as for Aluminium III)
- COD, Chemical Oxygen Demand [water, surface water]: 2.7e-5 kg; lognormal variance with pedigree 0.34, pedigree (1,1,5,1,4)
  (same comment as for Aluminium III)
- Cadmium II [water, ground-, long-term]: 1.67e-8 kg; lognormal variance with pedigree 7.28, pedigree (1,1,5,1,1)
  (same comment as for Aluminium III)
- Cadmium II [water, surface water]: 7.54e-10 kg; lognormal variance with pedigree 1.55, pedigree (1,1,5,1,4)
  (same comment as for Aluminium III)
- Calcium II [water, ground-, long-term]: 0.00299 kg; lognormal variance with pedigree 0.52, pedigree (1,1,5,1,1)
  (same comment as for Aluminium III)
- Calcium II [water, surface water]: 1.3e-5 kg; lognormal variance with pedigree 1.04, pedigree (1,1,5,1,4)
  (same comment as for Aluminium III)
- Chloride [water, ground-, long-term]: 4.34e-5 kg; lognormal variance with pedigree 0.34, pedigree (1,1,5,1,4)
  (same comment as for Aluminium III)
- Chloride [water, surface water]: 0.00179 kg; lognormal variance with pedigree 0.6, pedigree (1,1,5,1,4)
  (same comment as for Aluminium III)
- Chromium III [water, surface water]: 4.61e-8 kg; lognormal variance with pedigree 1.31, pedigree (1,1,5,1,4)
  (same comment as for Aluminium III)
- Chromium VI [water, ground-, long-term]: 1.53e-6 kg; lognormal variance with pedigree 1.52, pedigree (1,1,5,1,4)
  (same comment as for Aluminium III)
- Chromium VI [water, surface water]: 4.71e-7 kg; lognormal variance with pedigree 1.22, pedigree (1,1,5,1,4)
  (same comment as for Aluminium III)
- Cobalt II [water, ground-, long-term]: 6.44e-7 kg; lognormal variance with pedigree 1.63, pedigree (1,1,5,1,4)
  (same comment as for Aluminium III)
- Cobalt II [water, surface water]: 1.26e-10 kg; lognormal variance with pedigree 2.11, pedigree (1,1,5,1,4)
  (same comment as for Aluminium III)
- Copper ion [water, ground-, long-term]: 4.92e-5 kg; lognormal variance with pedigree 1.08, pedigree (1,1,5,1,4)
  (same comment as for Aluminium III)
- Copper ion [water, surface water]: 2.47e-9 kg; lognormal variance with pedigree 1.72, pedigree (1,1,5,1,4)
  (same comment as for Aluminium III)
- DOC, Dissolved Organic Carbon [water, ground-, long-term]: 0.00394 kg; lognormal variance with pedigree 0.06, pedigree (1,1,5,1,1)
  (same comment as for Aluminium III)
- DOC, Dissolved Organic Carbon [water, surface water]: 1.11e-5 kg; lognormal variance with pedigree 0.32, pedigree (1,1,5,1,4)
  (same comment as for Aluminium III)
- Fluoride [water, ground-, long-term]: 1.74e-5 kg; lognormal variance with pedigree 0.88, pedigree (1,1,5,1,4)
  (same comment as for Aluminium III)
- Fluoride [water, surface water]: 1.5e-6 kg; lognormal variance with pedigree 0.92, pedigree (1,1,5,1,4)
  (same comment as for Aluminium III)
- Iron ion [water, ground-, long-term]: 0.000557 kg; lognormal variance with pedigree 1.47, pedigree (1,1,5,1,4)
  (same comment as for Aluminium III)
- Iron ion [water, surface water]: 4.07e-7 kg; lognormal variance with pedigree 0.66, pedigree (1,1,5,1,1)
  (same comment as for Aluminium III)
- Lead II [water, ground-, long-term]: 5.73e-6 kg; lognormal variance with pedigree 7.12, pedigree (1,1,5,1,4)
  (same comment as for Aluminium III)
- Lead II [water, surface water]: 2.24e-9 kg; lognormal variance with pedigree 1.11, pedigree (1,1,5,1,4)
  (same comment as for Aluminium III)
- Magnesium [water, ground-, long-term]: 0.00397 kg; lognormal variance with pedigree 0.54, pedigree (1,1,5,1,4)
  (same comment as for Aluminium III)
- Magnesium [water, surface water]: 1.5e-5 kg; lognormal variance with pedigree 0.99, pedigree (1,1,5,1,1)
  (same comment as for Aluminium III)
- Manganese II [water, ground-, long-term]: 3.46e-5 kg; lognormal variance with pedigree 1.25, pedigree (1,1,5,1,4)
  (same comment as for Aluminium III)
- Manganese II [water, surface water]: 2.25e-9 kg; lognormal variance with pedigree 1.92, pedigree (1,1,5,1,4)
  (same comment as for Aluminium III)
- Mercury II [water, ground-, long-term]: 7.23e-9 kg; lognormal variance with pedigree 3.64, pedigree (1,1,5,1,4)
  (same comment as for Aluminium III)
- Mercury II [water, surface water]: 1.49e-9 kg; lognormal variance with pedigree 1.87, pedigree (1,1,5,1,4)
  (same comment as for Aluminium III)
- Molybdenum VI [water, ground-, long-term]: 3.55e-6 kg; lognormal variance with pedigree 1.46, pedigree (1,1,5,1,4)
  (same comment as for Aluminium III)
- Molybdenum VI [water, surface water]: 7.34e-7 kg; lognormal variance with pedigree 0.93, pedigree (1,1,5,1,1)
  (same comment as for Aluminium III)
- Nickel II [water, ground-, long-term]: 8.84e-6 kg; lognormal variance with pedigree 1.3, pedigree (1,1,5,1,4)
  (same comment as for Aluminium III)
- Nickel II [water, surface water]: 5.92e-9 kg; lognormal variance with pedigree 1.89, pedigree (1,1,5,1,1)
  (same comment as for Aluminium III)
- Nitrate [water, ground-, long-term]: 0.000135 kg; lognormal variance with pedigree 0.58, pedigree (1,1,5,1,4)
  (same comment as for Aluminium III)
- Nitrate [water, surface water]: 4.81e-5 kg; lognormal variance with pedigree 0.38, pedigree (1,1,5,1,1)
  (same comment as for Aluminium III)
- Phosphate [water, ground-, long-term]: 1.32e-5 kg; lognormal variance with pedigree 5.25, pedigree (1,1,5,1,4)
  (same comment as for Aluminium III)
- Phosphate [water, surface water]: 2.21e-8 kg; lognormal variance with pedigree 1.29, pedigree (1,1,5,1,4)
  (same comment as for Aluminium III)
- Potassium I [water, ground-, long-term]: 0.00109 kg; lognormal variance with pedigree 0.49, pedigree (1,1,5,1,4)
  (same comment as for Aluminium III)
- Potassium I [water, surface water]: 0.00023 kg; lognormal variance with pedigree 0.41, pedigree (1,1,5,1,1)
  (same comment as for Aluminium III)
- Selenium IV [water, ground-, long-term]: 1.73e-6 kg; lognormal variance with pedigree 1.05, pedigree (1,1,5,1,4)
  (same comment as for Aluminium III)
- Selenium IV [water, surface water]: 8.4e-7 kg; lognormal variance with pedigree 1.22, pedigree (1,1,5,1,4)
  (same comment as for Aluminium III)
- Silicon [water, ground-, long-term]: 0.00185 kg; lognormal variance with pedigree 5.14, pedigree (1,1,5,1,4)
  (same comment as for Aluminium III)
- Silicon [water, surface water]: 4.5e-6 kg; lognormal variance with pedigree 0.66, pedigree (1,1,5,1,4)
  (same comment as for Aluminium III)
- Silver I [water, ground-, long-term]: 3.01e-8 kg; lognormal variance with pedigree 1.93, pedigree (1,1,5,1,4)
  (same comment as for Aluminium III)
- Silver I [water, surface water]: 5.68e-12 kg; lognormal variance with pedigree 1.54, pedigree (1,1,5,1,1)
  (same comment as for Aluminium III)
- Sodium I [water, ground-, long-term]: 0.000712 kg; lognormal variance with pedigree 0.51, pedigree (1,1,5,1,4)
  (same comment as for Aluminium III)
- Sodium I [water, surface water]: 0.000199 kg; lognormal variance with pedigree 0.43, pedigree (1,1,5,1,4)
  (same comment as for Aluminium III)
- Strontium [water, ground-, long-term]: 5.82e-5 kg; lognormal variance with pedigree 1.11, pedigree (1,1,5,1,4)
  (same comment as for Aluminium III)
- Strontium [water, surface water]: 3.67e-8 kg; lognormal variance with pedigree 1.82, pedigree (1,1,5,1,4)
  (same comment as for Aluminium III)
- Sulfate [water, ground-, long-term]: 0.00353 kg; lognormal variance with pedigree 0.42, pedigree (1,1,5,1,4)
  (same comment as for Aluminium III)
- Sulfate [water, surface water]: 0.000683 kg; lognormal variance with pedigree 0.36, pedigree (1,1,5,1,4)
  (same comment as for Aluminium III)
- TOC, Total Organic Carbon [water, ground-, long-term]: 0.00394 kg; lognormal variance with pedigree 0.06, pedigree (1,1,5,1,1)
  (same comment as for Aluminium III)
- TOC, Total Organic Carbon [water, surface water]: 1.11e-5 kg; lognormal variance with pedigree 0.32, pedigree (1,1,5,1,4)
  (same comment as for Aluminium III)
- Thallium I [water, ground-, long-term]: 1e-6 kg; lognormal variance with pedigree 1.14, pedigree (1,1,5,1,1)
  (same comment as for Aluminium III)
- Thallium I [water, surface water]: 1.05e-9 kg; lognormal variance with pedigree 1.76, pedigree (1,1,5,1,4)
  (same comment as for Aluminium III)
- Titanium ion [water, ground-, long-term]: 5.15e-5 kg; lognormal variance with pedigree 1.33, pedigree (1,1,5,1,4)
  (same comment as for Aluminium III)
- Titanium ion [water, surface water]: 8.29e-10 kg; lognormal variance with pedigree 2.32, pedigree (1,1,5,1,4)
  (same comment as for Aluminium III)
- Zinc II [water, ground-, long-term]: 1.93e-6 kg; lognormal variance with pedigree 5.6, pedigree (1,1,5,1,4)
  (same comment as for Aluminium III)
- Zinc II [water, surface water]: 2.29e-8 kg; lognormal variance with pedigree 0.86, pedigree (1,1,5,1,1)
  (same comment as for Aluminium III)

## Sampling procedure
waste-specific calculation based on literature data

## Extrapolations
Typical elemental transfer coefficients from current studies for modern MSWI, completed with data from coal power plants and estimates, adapted for inert/burnable waste. Copied directly (no extrapolation) from a dataset on "average paper". Uncertainty adjusted accordingly.

## Review by Niels Jungbluth 2003-07-15
Passed. Calculation for standard deviation 95 of, i.e., infrastructure,
land occupation, transport services or other services can differ from
standard Pedigree approach used in this project and figures obtained by
this procedure.
