# integrated circuit production, memory type

Dataset: EcoSpold 2, unit process
Geography: GLO
Time period: 2000-01-01 to 2022-12-31
Technology level: current
Classification: EcoSpold01Categories: electronics/component
Classification: ISIC rev.4 ecoinvent: 2610:Manufacture of electronic components and boards
Synonyms: Silicon chip; Microchip; Microcircuit; Chip; Computer chip
Tags: ConvertedDataset
Scenario: Business-as-Usual
System model: Allocation at the point of substitution
Generated by: Martin Lehmann
Published in: Hischier R. 2007
Database: ecoinvent
isCopyrightProtected: true

## General comment
This dataset represents the production of 1 kg of a memory type integrated circuit, including the processes and materials required to package up a fabricated wafer into a logic type microchip. It is mainly based on literature data.
[This dataset was already contained in the ecoinvent database version 2. It was not individually updated during the transfer to ecoinvent version 3. Life Cycle Impact Assessment results may still have changed, as they are affected by changes in the supply chain, i.e. in other datasets. This dataset was generated following the ecoinvent quality guidelines for version 2. It may have been subject to central changes described in the ecoinvent version 3 change report (http://www.ecoinvent.org/database/ecoinvent-version-3/reports-of-changes/), and the results of the central updates were reviewed extensively. The changes added e.g. consistent water flows and other information throughout the database. The documentation of this dataset can be found in the ecoinvent reports of version 2, which are still available via the ecoinvent website. The change report linked above covers all central changes that were made during the conversion process.]

## Included activities start
From reception of plastics and metals at the factory gate.

## Included activities end
It includes all the processes required to produce a memory type microchip. Included are 'die separation', 'encapsulation', 'die attachment', 'lead bonding', 'plating', and 'marking'. These operations are represented by the material input of copper alloy, epoxy resin, doped silicon, glue, gold (wires) etc. and the assembly process energy used. No water is required for the assembly of the integrated circuit. Neither direct air emissions nor any waste are balanced for this packaging dataset.

## Geography
The data is based on a semiconductor company in the USA representing international standard.

## Technology
The chip packaging technology operations are: backside preparation, die separation (scribing, sawing), die pick, die attach, inspection, lead bonding, preseal inspection, packaging sealing, plating, lead trim, marking and final test. In particular:
Die attaching: in the center of every package is an area where the chip is securely attached into the package, with the goals of creating a strong physical bond between the chip and the package, providing either an electrical conducting or insulating contact between the die and the package, and serving as a medium to transfer heat from the chip to the package.
Lead bonding: thin wires are bonded between the chip bonding pads and the inner leads of the package, the methods of connecting the chip to the package are: wire bonding, bump (ball) technology, and tape automated bonding (TAB).

## Reference product
- integrated circuit, memory type: 1 kg; source SEMI 2012; By-product classification allocatable product; CPC 47160: Electronic integrated circuits
  Memory circuits are designed to store and give back data in the same form in which it is entered. Pushing the pi (p) key on a calculator activates the memory part of the circuit where the value of p (3.14) is stored.
  Metal-oxide semiconductor (MOS) is the favored transistor structure for memory circuits. With process improvements and improved silicon gate structures, complementary metal-oxide semiconductor (CMOS) is the memory technology of choice. Some bipolar memories are favored for their fast speed and switching capabilities. While logic circuits can be (and are) made in MOS technology, most MOS circuits produced are memories, with the majority incorporated into computers
  There are two principal types of memory circuits:
  Nonvolatile memories. A non-volatile memory device is one that does not lose its stored information when it loses its power. They are: ROM (read-only memory); PROM (programmable read-only memory); EPROM (erasable programmable ROM); EEPROM (electronically erasable PROM);
  Volatile memories: RAM (random-access memory); DRAM (dynamic random-access memory); SRAM (static random-access memory); FERAM (ferroelectric random-access memory);
  EcoSpold01Location=GLO
  production volume 1.83349e9 kg
    0.031415 m2 per wafer * 12 months/year * 10700000 wafers per month. Assumption: 50 % of wafer production goes for memory type IC, 50% for logic type IC. 4'033'686 m2*50%/4.44E-5 m2 wafer / kg memory IC; SEMI data for 2009 installed capacity; SEMI World Fab Forecast February 2012; Figure 2 at http://www.semi.org/en/node/40871
  property carbon content, fossil 0.113389
    Calculated as the addition of C contents in the product composition
  property price 121.855 EUR2005
    Calculated based on inputs: The price of the product has been calculated as a sum of the values of the material and energy inputs for this product. This value is therefore a rough estimation. It may underestimate the real price since there are additional expenses when producing any product. These expences can include for example labour costs, treatment of waste materials and profit for the producer. Please consider carefully whether this level of data quality is acceptable for your application.
  properties: carbon allocation 0.113389 kg, carbon content 0.113389, carbon content, non-fossil 0, dry mass 1 kg, water content 0, water in wet mass 0 kg, wet mass 1 kg

## Inputs from technosphere
- chemical, organic: 0.0066 kg; source ST Microelectronics 2004; lognormal variance with pedigree 0.0527, pedigree (2,4,5,3,1)
  Estimation, based on literature. It is based on a wafer of 0.9% (w/w) of the total packaged IC weight (2.3 g). Density of Si = 2.33 g/cm3; Wafer thickness in chip = 200 um (micrometer = 0.2 mm)
  The required surface for a 1 kg packaged memory type chip is calculated as: 20.7 mg = 0.2 mm2* x mm2 * 2.33 g/cm3 ; x = 44.4 mm2
  Chemical organics is taken as a proxy for TBBA.
  EcoSpold01Location=GLO
  properties: carbon content, fossil 0.628, dry mass 1 kg, heating value, net 19.03 MJ, wet mass 1 kg
  note on carbon content, fossil: This dataset is an unweighted average of 20 organic substances (listed in Tab 88.1, ecoinvent v2.2 report 8, part II), being part of the top100 chemicals included in this database. The C-content has also been calculated as an unweighted average of the C content of the substances composing this dataset.
- copper, cathode: 0.31297 kg; source ST Microelectronics 2004; lognormal variance with pedigree 0.0527, pedigree (2,4,5,3,1)
  EcoSpold01Location=GLO
  Estimation, based on literature. It is based on a wafer of 0.9% (w/w) of the total packaged IC weight (2.3 g). Density of Si = 2.33 g/cm3; Wafer thickness in chip = 200 um (micrometer = 0.2 mm)
  The required surface for a 1 kg packaged memory type chip is calculated as: 20.7 mg = 0.2 mm2* x mm2 * 2.33 g/cm3 ; x = 44.4 mm2
  properties: dry mass 1 kg, wet mass 1 kg
- electricity, medium voltage: 668.61 kWh; source Williams E. D. 2002; lognormal variance with pedigree 0.0541, pedigree (3,4,5,3,1)
  Estimation, based on literature. A total energy consumption of 5.8 MJ per 2 g of chips is considered. 83% is electricity.
  EcoSpold01Location=UCTE
- electronic component factory: 2e-8 unit; lognormal variance with pedigree 0.3707, pedigree (2,4,5,3,3)
  Proxy. Due to a lack of more specific information, the infrastructure module representing an electronic component production plant was used.
  EcoSpold01Location=GLO
- epoxy resin insulator, SiO2: 0.64147 kg; source ST Microelectronics 2004; lognormal variance with pedigree 0.0527, pedigree (2,4,5,3,1)
  Estimation, based on literature. It is based on a wafer of 0.9% (w/w) of the total packaged IC weight (2.3 g). Density of Si = 2.33 g/cm3; Wafer thickness in chip = 200 um (micrometer = 0.2 mm)
  The required surface for a 1 kg packaged memory type chip is calculated as: 20.7 mg = 0.2 mm2* x mm2 * 2.33 g/cm3 ; x = 44.4 mm2
  EcoSpold01Location=RER
  properties: carbon content, fossil 0.1693, dry mass 1 kg, heating value, net 5.13 MJ, wet mass 1 kg
  note on carbon content, fossil: Cast resin insulators are produced from epoxy resins, hardeners and a filling material. Aluminium oxide, dolomite and quartz powder are well-known filling materials.The filling material is assumed to be 60% of cast resin insulators (ecoinvent v2.2 report 8. Part 31)
- epoxy resin, liquid: 0.0005782, 0.0001218 kg (2 suppliers, which the file names only by identifier); sum of these 0.0007 kg; source ST Microelectronics 2004; lognormal variance with pedigree 0.0527, pedigree (2,4,5,3,1)
  (same comment as for epoxy resin insulator, SiO2)
  properties: carbon content, fossil 0.42325, dry mass 1 kg, heating value, net 12.82 MJ, wet mass 1 kg
- gold: 0.001 kg; source ST Microelectronics 2004; lognormal variance with pedigree 0.0527, pedigree (2,4,5,3,1)
  Estimation, based on literature. It is based on a wafer of 0.9% (w/w) of the total packaged IC weight (2.3 g). Density of Si = 2.33 g/cm3; Wafer thickness in chip = 200 um (micrometer = 0.2 mm)
  The required surface for a 1 kg packaged memory type chip is calculated as: 20.7 mg = 0.2 mm2* x mm2 * 2.33 g/cm3 ; x = 44.4 mm2
  EcoSpold01Location=GLO
  properties: dry mass 1 kg, wet mass 1 kg
- heat, district or industrial, other than natural gas: 493 MJ; source Williams E. D. 2002; lognormal variance with pedigree 0.0541, pedigree (3,4,5,3,1)
  EcoSpold01Location=RER
  Estimation, based on literature. A total energy consumption of 5.8 MJ per 2 g of chips is considered. 17% is heat.
  properties: heating value, net 1 MJ
- lead: 0.00078 kg; source ST Microelectronics 2004; lognormal variance with pedigree 0.0527, pedigree (2,4,5,3,1)
  (same comment as for epoxy resin insulator, SiO2)
  properties: dry mass 1 kg, wet mass 1 kg
- phosphorus, white, liquid: 0.000321 kg; source ST Microelectronics 2004; lognormal variance with pedigree 0.0527, pedigree (2,4,5,3,1)
  EcoSpold01Location=RER
  Estimation, based on literature. It is based on a wafer of 0.9% (w/w) of the total packaged IC weight (2.3 g). Density of Si = 2.33 g/cm3; Wafer thickness in chip = 200 um (micrometer = 0.2 mm)
  The required surface for a 1 kg packaged memory type chip is calculated as: 20.7 mg = 0.2 mm2* x mm2 * 2.33 g/cm3 ; x = 44.4 mm2
  properties: dry mass 1 kg, wet mass 1 kg
- silver: 0.0021 kg; source ST Microelectronics 2004; lognormal variance with pedigree 0.0527, pedigree (2,4,5,3,1)
  (same comment as for epoxy resin insulator, SiO2)
  properties: dry mass 1 kg, wet mass 1 kg
- steel, unalloyed: 0.007704 kg
  properties: carbon content, fossil 0.0025, dry mass 1 kg, wet mass 1 kg
  note on carbon content, fossil: Unalloyed steels or carbon steels are those in which the level of an individual element in no case reaches or exceeds the limiting concentration given in Tab. 3.1 ecoinvent v2.2 report 10_partII. Assumed to have a C content of 0.25%
- tin: 0.00442 kg; source ST Microelectronics 2004; lognormal variance with pedigree 0.0527, pedigree (2,4,5,3,1)
  (same comment as for phosphorus, white, liquid)
  properties: dry mass 1 kg, wet mass 1 kg
- wafer, fabricated, for integrated circuit: 0.0190558 m2; lognormal variance with pedigree 0.0527, pedigree (2,4,5,3,1)
  Calculation based on area ratio between wafer input and IC memory type. Average wafer thickness 200 um (micrometer; = 0.2 mm);
  Density of Si = 2.33 g/cm3;
  Calculation: 0.9% (w/w) of whole logic chip (2.33 g) is wafer --> 20.7 mg
  20.7 mg = 0.2 mm * x mm2 * 2.33 g/cm3 (=mg/mm3)
  8.88 mm3 = 0.2 mm * x mm2
  x = 44.4 mm2 = 0.444 cm2 = 0.00444 dm2 = 0.0000444 m2
  Scaled to 1kg of reference product this leads to an amount of:
  0.0000444m2 * (1000g/2.33g) = 0.019056
  EcoSpold01Location=GLO
  properties: dry mass 0.7 kg, wet mass 0.7 kg
- zinc: 0.01092 kg; source ST Microelectronics 2004; lognormal variance with pedigree 0.0527, pedigree (2,4,5,3,1)
  EcoSpold01Location=RER
  Estimation, based on literature. It is based on a wafer of 0.9% (w/w) of the total packaged IC weight (2.3 g). Density of Si = 2.33 g/cm3; Wafer thickness in chip = 200 um (micrometer = 0.2 mm)
  The required surface for a 1 kg packaged memory type chip is calculated as: 20.7 mg = 0.2 mm2* x mm2 * 2.33 g/cm3 ; x = 44.4 mm2
  Zinc is taken as a proxy for Antimony oxide.
  properties: dry mass 1 kg, wet mass 1 kg

## Sampling procedure
Manufacturer information and "chemical content" publications by companies.

## Review by Rolf Frischknecht 2007-11-14
passed.
-

## Review by Bo Weidema 2012-02-13
Passed

## Review by Bo Weidema 2012-02-13
Excess waste amounts in previous dataset has now been corrected. Also a number of smaller improvements in documentation and names of exchanges.
