# roof tile production

Dataset: EcoSpold 2, unit process
Geography: RoW
Time period: 1992-01-01 to 2022-12-31
Technology level: current
Classification: ISIC rev.4 ecoinvent: 2392:Manufacture of clay building materials
Classification: EcoSpold01Categories: construction materials/coverings
Tags: ConvertedDataset
Scenario: Business-as-Usual
System model: Allocation at the point of substitution
Generated by: Daniel Kellenberger (obsolete)
Published in: Kellenberger D. 2007
Database: ecoinvent
isCopyrightProtected: true

## General comment
Not included: charge of the wastewater and solid waste. It's assumed that the waste heat is totally reused for drying. No hard coal coke is used by any of these 12 plants. In order to obtain "impermeable" tiles, no media is included which may make it porous (as made for bricks). Not included is the use of engobe to colour the tiles.
[This dataset was already contained in the ecoinvent database version 2. It was not individually updated during the transfer to ecoinvent version 3. Life Cycle Impact Assessment results may still have changed, as they are affected by changes in the supply chain, i.e. in other datasets. This dataset was generated following the ecoinvent quality guidelines for version 2. It may have been subject to central changes described in the ecoinvent version 3 change report (http://www.ecoinvent.org/database/ecoinvent-version-3/reports-of-changes/), and the results of the central updates were reviewed extensively. The changes added e.g. consistent water flows and other information throughout the database. The documentation of this dataset can be found in the ecoinvent reports of version 2, which are still available via the ecoinvent website. The change report linked above covers all central changes that were made during the conversion process.]

## Included activities end
includes first ginding process, wet process (includes second ginding, mixing and plastifying), storage, forming (compression molding method) and cutting, drying, firing, loading, packing and storage.

## Geography
certain exchanges are proxies (CH for RER), specially for the petrol consumption the proxy "operation, passenger car" and for gypsum moulding the module "gypsum fibre board" has been used; data stem from Switzerland, Germany and Austria

## Technology
Mix of different technologies (different firing fuels) in A, D, CH. Share of heavy oil to natural gas about 20% to 80%

## Parameters
- fraction, process water, to air: 0.15 dimensionless; lognormal variance with pedigree 0.092025, pedigree (4,4,3,2,4)
- fraction, tap water, to air: 0.15 dimensionless; lognormal variance with pedigree 0.092025, pedigree (4,4,3,2,4)

## Reference product
- roof tile: 1 kg; By-product classification allocatable product; CPC 373: Refractory products and structural non-refractory clay products
  EcoSpold01Location=RER
  production volume 2.67763 kg
    This is a placeholder value that does not reflect real-world production volumes. This dataset does not currently require a real-world production volume to work in the database framework, and no actual data were collected yet. This has no negative effect on the results of the ecoinvent database.
  property carbon content, fossil 0
    Made mainly from clay, sand and other aditives. All C contained in raw materials is emitted as CO2 ecoinvent v2.2 report 7, part IV
  property carbon content, non-fossil 0
    (same comment as for roof tile)
  property price 0.196 EUR2005
    Calculated value based on data from United Nations Commodity Trade Statistics Database (comtrade.un.org). UN comtrade category: 690510 Roofing tiles, ceramic. Year 2005. Using exchange rate of 1EURO = 1.209 USD. Average of price of import into 5 main markets (EU, US, JP, IN and CN).
  properties: carbon allocation 0 kg, carbon content 0, dry mass 1 kg, water content 0, water in wet mass 0 kg, wet mass 1 kg

## Inputs from technosphere
- EUR-flat pallet: 1.61e-5 unit; lognormal variance with pedigree 0.148, pedigree (5,5,5,5,3)
  EcoSpold01Location=RER
  Uncertainty: ;
  properties: carbon content, fossil 0.0311351, carbon content, non-fossil 0.58833, dry mass 18.3333 kg, heating value, net 335.11 MJ, water content 0.2, wet mass 22 kg
  note on carbon content, fossil: C content in components of the pallet (ecoinvent v2.2 report 7_part XVIII)
- clay: 1.35 kg; lognormal variance with pedigree 0.148, pedigree (5,5,5,5,3)
  EcoSpold01Location=CH
  Uncertainty: ;
  properties: dry mass 0.965 kg, water content 0.0362694, wet mass 1 kg
- clay pit infrastructure: 2e-10 unit; lognormal variance with pedigree 0.41, pedigree (3,5,5,5,3)
  EcoSpold01Location=CH
  Uncertainty: ;
- diesel, burned in building machine: 0.0297 MJ; lognormal variance with pedigree 0.148, pedigree (5,5,5,5,3)
  EcoSpold01Location=GLO
  Uncertainty: ;
  properties: heating value, net 1 MJ
- electricity, medium voltage: 0.0182305, 0.0056885, 0.000169403, 0.000864365, 0.0521924, 0.00285485 kWh (6 suppliers, which the file names only by identifier); sum of these 0.08 kWh; lognormal variance with pedigree 0.148, pedigree (5,5,5,5,3)
  EcoSpold01Location=UCTE
  Uncertainty: ;
- heavy fuel oil: 0.000505342, 4.25223e-6, 2.16175e-5, 2.80305e-5, 5.45499e-6, 7.30231e-6 kg (6 suppliers, which the file names only by identifier); sum of these 0.000572 kg; lognormal variance with pedigree 0.148, pedigree (5,5,5,5,3)
  EcoSpold01Location=RER
  Uncertainty: ;
  properties: carbon content, fossil 0.849, dry mass 1 kg, heating value, net 41.2 MJ, wet mass 1 kg
- light fuel oil: 0.00693033, 0.00068789, 6.61416e-5, 4.91542e-5, 4.56476e-5, 0.000340837 kg (6 suppliers, which the file names only by identifier); sum of these 0.00812 kg; lognormal variance with pedigree 0.148, pedigree (5,5,5,5,3)
  EcoSpold01Location=RER
  Uncertainty: ;
  properties: carbon content, fossil 0.862, dry mass 1 kg, heating value, net 42.6 MJ, wet mass 1 kg
- lime, packed: 0.0239 kg; lognormal variance with pedigree 0.148, pedigree (5,5,5,5,3)
  EcoSpold01Location=CH
  Uncertainty: ;
  properties: carbon content, fossil 0.117492, dry mass 0.998 kg, water content 0.00200401, wet mass 1 kg
  note on carbon content, fossil: Table 3.1, ecoinvent v2.2 report 7, part VII, pg 3. MW CaCO3=100, MW MgCO3=84
- limestone, crushed, for mill: 0.000394419, 1.58138e-6 kg (2 suppliers, which the file names only by identifier); sum of these 0.000396 kg; lognormal variance with pedigree 0.148, pedigree (5,5,5,5,3)
  EcoSpold01Location=CH
  Uncertainty: ;
  properties: carbon content, fossil 0.117492, dry mass 0.998 kg, water content 0.00200401, wet mass 1 kg
- lubricating oil: 1.32e-5 kg; lognormal variance with pedigree 0.148, pedigree (5,5,5,5,3)
  EcoSpold01Location=RER
  Uncertainty: ;
  properties: carbon content, fossil 0.75, dry mass 1 kg, heating value, net 40.2 MJ, wet mass 1 kg
  note on carbon content, fossil: Lubricating oil is produced from diesel. C-content/dry mass of fats and oils considered 75%, from: ecoinvent v2.2 report, n 15a, pg 40
  note on heating value, net: Literature value, Source: IPCC 2006, 2006 IPCC Guidelines for National Greenhouse Gas Inventories, Prepared by the National Greenhouse Gas Inventories Programme, Eggleston H.S., Buendia L., Miwa K., Ngara T. and Tanabe K. (eds). Published: IGES, Japan
- natural gas, high pressure: 0.000392978, 0.000165877, 0.000950023, 0.000281931, 0.015949, 0.00163012, 0.000177941, 5.25078e-6, 0.000631841, 0.000663508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 m3 (24 suppliers, which the file names only by identifier); sum of these 0.0476923 m3; lognormal variance with pedigree 0.148, pedigree (5,5,5,5,3)
  EcoSpold01Location=RER
  Uncertainty: ;
  properties: carbon content, fossil 0.602381, dry mass 0.84 kg, heating value, gross 39 MJ, heating value, net 36 MJ, wet mass 0.84 kg
  note on carbon content, fossil: An average C content of 0.506 kg C/ m3 has been assumed (this average has been calculated using data in Tab 3.5, ecoinvent v2.2 report 6_V
  note on heating value, net: Literature value, Source: Christoph Meili;Niels Jungbluth;Maresa Bussa (2021) Life cycle inventories of crude oil and natural gas extraction. ESU-services Ltd. commissioned by BAFU & VSG, Schaffhausen, Switzerland, http://esu-services.ch/data/public-lci-reports/
- packaging film, low density polyethylene: 0.000542 kg; lognormal variance with pedigree 0.148, pedigree (5,5,5,5,3)
  EcoSpold01Location=RER
  Uncertainty: ;
  properties: carbon content, fossil 0.857143, dry mass 1 kg, heating value, net 42.47 MJ, wet mass 1 kg
  note on carbon content, fossil: Polyethylene is formed out of a huge amount of ethylene monomers (C2H4) (ecoinvent v2.2 report 11_II). MW=28 g/mol
- polyethylene, high density, granulate: 8.58e-7 kg; lognormal variance with pedigree 0.148, pedigree (5,5,5,5,3)
  EcoSpold01Location=RER
  Uncertainty: ;
  properties: carbon content, fossil 0.857143, dry mass 1 kg, heating value, net 42.47 MJ, wet mass 1 kg
- sand: 0.000222454, 1.15488e-6, 0.0144764 kg (3 suppliers, which the file names only by identifier); sum of these 0.0147 kg; lognormal variance with pedigree 0.148, pedigree (5,5,5,5,3)
  EcoSpold01Location=CH
  Uncertainty: ;
  properties: dry mass 1 kg, wet mass 1 kg
- sheet rolling, chromium steel: 1.57e-7 kg; lognormal variance with pedigree 0.148, pedigree (5,5,5,5,3)
  EcoSpold01Location=RER
  Uncertainty: ;
- sheet rolling, steel: 1.57e-5 kg; lognormal variance with pedigree 0.148, pedigree (5,5,5,5,3)
  EcoSpold01Location=RER
  Uncertainty: ;
- steel, low-alloyed, hot rolled: 3.06e-5 kg; lognormal variance with pedigree 0.148, pedigree (5,5,5,5,3)
  EcoSpold01Location=RER
  Uncertainty: ;
  properties: carbon content, fossil 0.005, dry mass 1 kg, wet mass 1 kg
  note on carbon content, fossil: Low alloyed steel composition given in Tab. 3.2 ecoinvent v2.2 report 10_partII. Steel assumed to have a C content of 0.5%
- stucco: 0.00153 kg; lognormal variance with pedigree 0.148, pedigree (5,5,5,5,3)
  EcoSpold01Location=CH
  Uncertainty: ;
  properties: dry mass 1 kg, wet mass 1 kg
- tap water: 5.09655e-5, 0.00212392, 8.42288e-5, 0.000157167, 0.0243051, 5.52532e-5, 0.000423396 kg (7 suppliers, which the file names only by identifier); sum of these 0.0272 kg; source Bruck, M. 1996; lognormal variance with pedigree 0.148, pedigree (5,5,5,5,3)
  EcoSpold01Location=RER
  Literature value. Water is supplied from public water supply.
  Uncertainty: ;
  properties: carbon content, fossil 0.00178991, dry mass 0.000337476 kg, water content 2962.17, wet mass 1 kg
  note on carbon content, fossil: Bicarbonate content is 2.93 mol/m3. CO2 content is 0.1 mol/m3 (ecoinvent v2.2 report 8, Tab 93.1).
- transport, passenger car: 0.0166 km; lognormal variance with pedigree 0.148, pedigree (5,5,5,5,3)
  EcoSpold01Location=RER
  Uncertainty: ;

## Inputs from nature
- Water, well, in ground [natural resource, in water]: 7.36e-5 m3; name water_well_in_ground_input; source Bruck, M. 1996; lognormal variance with pedigree 0.148, pedigree (5,5,5,5,3)
  Proxy, Swiss module was used as proxy.
  Literature value, water is assumed to be pumped on the company's ground.
  Proxy, Swiss module was used as proxy.
  Literature value, water is assumed to be pumped on the company's ground.
  Uncertainty: ;

## Emissions to nature
- Benzene [air, unspecified]: 4.44e-6 kg; lognormal variance with pedigree 0.268, pedigree (5,5,5,5,3)
  Uncertainty: ;
- Carbon dioxide, fossil [air, unspecified]: 0.271 kg; lognormal variance with pedigree 0.148, pedigree (5,5,5,5,3)
  Uncertainty: ;
- Carbon monoxide, fossil [air, unspecified]: 0.000586 kg; lognormal variance with pedigree 0.148, pedigree (5,5,5,5,3)
  Uncertainty: ;
- Formaldehyde [air, unspecified]: 2.46e-5 kg; lognormal variance with pedigree 0.268, pedigree (5,5,5,5,3)
  Uncertainty: ;
- Hydrochloric acid [air, unspecified]: 6.11e-5 kg; lognormal variance with pedigree 0.188, pedigree (5,5,5,5,3)
  Uncertainty: ;
- Hydrogen fluoride [air, unspecified]: 5.28e-5 kg; lognormal variance with pedigree 0.188, pedigree (5,5,5,5,3)
  Uncertainty: ;
- NMVOC, non-methane volatile organic compounds [air, unspecified]: 0.000115 kg; lognormal variance with pedigree 0.268, pedigree (5,5,5,5,3)
  Uncertainty: ;
- Nitrogen oxides [air, unspecified]: 0.00039 kg; lognormal variance with pedigree 0.188, pedigree (5,5,5,5,3)
  Uncertainty: ;
- Particulate Matter, < 2.5 um [air, unspecified]: 2.1e-5 kg; lognormal variance with pedigree 0.448, pedigree (5,5,5,5,3)
  Uncertainty: ;
- Particulate Matter, > 10 um [air, unspecified]: 7.01e-6 kg; lognormal variance with pedigree 0.188, pedigree (5,5,5,5,3)
  Uncertainty: ;
- Phenol [air, unspecified]: 1.95e-7 kg; lognormal variance with pedigree 0.268, pedigree (5,5,5,5,3)
  Uncertainty: ;
- Sulfur dioxide [air, unspecified]: 0.00015 kg; lognormal variance with pedigree 0.268, pedigree (5,5,5,5,3)
  Uncertainty: ;
- Water [air, unspecified]: 1.512e-5 m3; name water_to_air_unspecified; lognormal variance with pedigree 0.0827, pedigree (2,2,5,5,1)
  Calculated value based on literature values and expert opinion. See comments in the parametres' comment field.
  property fraction, origin: fresh water 1; name fraction_origin_fresh_water
  property fraction, origin: salt water 0; name fraction_origin_salt_water
  property fraction, origin: unspecified 0; name fraction_origin_unspecified
- Water [water, unspecified]: 8.568e-5 m3; name water_to_water_unspecified; lognormal variance with pedigree 0.0827, pedigree (2,2,5,5,1)
  (same comment as for Water)
  property carbon content, fossil 0; name C_content_fossil
  property carbon content, non-fossil 0; name C_content_non_fossil
  property fraction, origin: fresh water 1; name fraction_origin_fresh_water_Ww
  property fraction, origin: salt water 0; name fraction_origin_salt_water_Ww
  property fraction, origin: unspecified 0; name fraction_origin_unspecified_Ww
  property water in wet mass 1000 kg; name WWM

## Extrapolations
Extrapolated from "brick, at plant" as it is basically the same production process. The heating fuel consumption and most emissions have been increased by the factor 1.5 (because of need to e.g. increase frost resistance compared to brick). The emissions HCl and HF have been increased by the factor 5. The electricity consumption has been approximatly doubled. This dataset has been copied from an original dataset covering the geography RER. The uncertainty has been adjusted accordingly.

## Review by Roberto Dones 2005-07-19
passed
