# planting, potato

Dataset: EcoSpold 2, unit process
Geography: CA-QC
Time period: 1991-01-01 to 2022-12-31
Technology level: current
Classification: ISIC rev.4 ecoinvent: 0161:Support activities for crop production
Classification: EcoSpold01Categories: agricultural means of production/work processes
Scenario: Business-as-Usual
System model: Allocation at the point of substitution
Generated by: Dominique Maxime
Published in: Nemecek, T. 2007
Database: ecoinvent
isCopyrightProtected: true

## General comment
This dataset represents the service of planting potatoes over 1 ha of agricultural land. A four-row potato planter, working width of 3.7 m, is considered.
[This dataset was already contained in the ecoinvent database version 2. It was not individually updated during the transfer to ecoinvent version 3. Life Cycle Impact Assessment results may still have changed, as they are affected by changes in the supply chain, i.e. in other datasets. This dataset was generated following the ecoinvent quality guidelines for version 2. It may have been subject to central changes described in the ecoinvent version 3 change report (http://www.ecoinvent.org/database/ecoinvent-version-3/reports-of-changes/), and the results of the central updates were reviewed extensively. The changes added e.g. consistent water flows and other information throughout the database. The documentation of this dataset can be found in the ecoinvent reports of version 2, which are still available via the ecoinvent website. The change report linked above covers all central changes that were made during the conversion process.]
Child dataset exchanges scaled from GLO parent dataset based on diesel consumption in Quebec. Created to proxy farm machinery/fieldwork representative of the Quebec context. Data quality indicators adjusted accordingly. Other difference with the parent dataset is the production volume, which now represents the production volume in Quebec.
Diesel consumption is calculated from primary data and models from the American Society of Agricultural and Biological Engineers (ASABE) published in 2006 and might be representative of more recent technology than the GLO parent dataset.

## Included activities start
Planting process starting from preliminary work at farm, like attaching the adequate machinery to the tractor.

## Included activities end
This activity ends with transfer back to farm and concluding work, like uncoupling the machine; The dataset includes transfer to field; field work for an area of land of 1 ha, including turning, idling and overlapping. The inventory takes into account the diesel fuel consumption and the amount of agricultural machinery and of the shed, which has to be attributed to the planting. Also taken into consideration is the amount of emissions to the air from combustion and the emission to the soil from tyre abrasion during the work process. The dataset does not include dust other than from combustion and noise. The planting material is not taken into account.

## Geography
Child dataset air emissions related to diesel combustion are scaled from parent dataset (GLO) based on the ratio of diesel consumption in Quebec over diesel consumption of GLO. Created to proxy farm machinery/fieldwork representative of the Quebec context. Data quality indicators adjusted accordingly.
References

CRAAQ 2012

## Technology
Emissions by the newest models of tractors set into operation during the period from 1999 to 2001.

## Time period
Measurements were made in the last few years (1999-2001).
Diesel consumption is calculated from primary data and models from the American Society of Agricultural and Biological Engineers (ASABE) published in 2006 and might be representative of more recent time period than the GLO parent dataset.

## Parameters
- ecoinvent diesel consumption: 8.9 kg/ha; name EI_diesel; lognormal variance with pedigree 0.004, pedigree (1,4,1,5,1)
  Diesel consumption in the parent dataset (ecoinvent); kg diesel/ha
- farm machinery diesel consumption ratio: 1.20787 dimensionless; name machine_diesel_ratio; = qc_diesel/ EI_diesel
  Ratio of diesel consumption for tractor and its machinery: kg diesel per ha of the Quebec machinery/kg diesel per ha of the ecoinvent"s parent machinery
- quebec cropped area: 1.87476e6 ha; name qc_crop_area; lognormal variance with pedigree 0.0006, pedigree (1,1,1,1,1)
  Land in crops, Quebec, in 2011. Source: Statistics Canada, 2013. Table 004-0002 - Census of Agriculture, total area of farms and use of farm land, CANSIM (database). (accessed: 2013-11-15) ("Land in crops" includes field crops, vegetables, fruits and nursery crops, and sod.) Statistics Canada
- quebec diesel consumption: 10.75 kg/ha; name qc_diesel; lognormal variance with pedigree 0.000125, pedigree (1,2,1,2,1)
  Diesel consumption of tractor and machinery within the Québec context; kg diesel/ha
- quebec potatoes harvest area: 16950 ha; name qc_potatoes_harvest_area; lognormal variance with pedigree 3.093e-5, pedigree (1,1,1,1,1)
  Harvested area for potatoes in Quebec (2008-2011 average). Source: MAPAQ (2013) Statistiques principales du secteur de la pomme de terre, Québec, 2008-2011. http://www.mapaq.gouv.qc.ca/SiteCollectionDocuments/Statistiques/secteurpommedeterre.pdf
- world arable land area: 1.39628e9 ha; name world_arable_area; lognormal variance with pedigree 0.0006, pedigree (1,1,1,1,1)
  Arable land area, World, in 2011. Source: FAOSTAT, 2013
- world potatoes harvest area: 1.86701e7 ha; name world_potatoes_harvest_area; lognormal variance with pedigree 6.963e-5, pedigree (1,1,1,1,1)
  Harvested area for potatoes in the world (2008-2011 average). Source: FAOSTAT, 2013

## Reference product
- potato planting: 1 ha; By-product classification allocatable product; CPC 86119: Other support services to crop production
  production volume 17413.5 ha
    Gross approximation of Quebec production volume using relative value of Quebec harvested area to world harvested area.
  property price 20.634 EUR2005
    Calculated based on inputs: The price of the product has been calculated as a sum of the values of the material and energy inputs for this product. This value is therefore a rough estimation. It may underestimate the real price since there are additional expenses when producing any product. These expences can include for example labour costs, treatment of waste materials and profit for the producer. Please consider carefully whether this level of data quality is acceptable for your application.
  properties: carbon allocation 0 kg, carbon content 0

## Inputs from technosphere
- agricultural machinery, unspecified: 1.99 kg; lognormal variance with pedigree 0.044, pedigree (1,4,5,5,1)
- diesel: 10.75 kg; lognormal variance with pedigree 0.044, pedigree (1,4,5,5,1)
  Scaling to Quebec diesel consumption
  properties: carbon content, fossil 0.865, dry mass 1 kg, heating value, net 42.8 MJ, wet mass 1 kg
  note on carbon content, fossil: C-content of diesel is 86.5% (ecoinvent v2.2 report 6_IV, Tab 3.14)
- shed: 0.0132 m2; lognormal variance with pedigree 0.344, pedigree (1,4,5,5,1)
- tractor, 4-wheel, agricultural: 2.43 kg; lognormal variance with pedigree 0.044, pedigree (1,4,5,5,1)
  Scaling to Quebec diesel consumption

## Emissions to nature
- Ammonia [air, non-urban air or from high stacks]: 0.000215 kg; lognormal variance with pedigree 0.1001, pedigree (1,2,5,5,3)
  Scaling to Quebec diesel consumption
- Benzene [air, non-urban air or from high stacks]: 7.85112e-5 kg; lognormal variance with pedigree 0.1001, pedigree (1,2,5,5,3)
  Scaling to Quebec diesel consumption
- Benzo(a)pyrene [air, non-urban air or from high stacks]: 3.225e-7 kg; lognormal variance with pedigree 0.7001, pedigree (1,2,5,5,3)
  Scaling to Quebec diesel consumption
- Cadmium II [air, non-urban air or from high stacks]: 1.075e-7 kg; lognormal variance with pedigree 0.7001, pedigree (1,2,5,5,3)
  Scaling to Quebec diesel consumption
- Carbon dioxide, fossil [air, non-urban air or from high stacks]: 33.4579 kg; lognormal variance with pedigree 0.0601, pedigree (1,2,5,5,3)
  Scaling to Quebec diesel consumption
- Carbon monoxide, fossil [air, non-urban air or from high stacks]: 0.0640169 kg; lognormal variance with pedigree 0.694, pedigree (1,4,5,5,1)
  Scaling to Quebec diesel consumption
- Chromium III [air, non-urban air or from high stacks]: 5.375e-7 kg; lognormal variance with pedigree 0.7001, pedigree (1,2,5,5,3)
  Scaling to Quebec diesel consumption
- Copper ion [air, non-urban air or from high stacks]: 1.82388e-5 kg; lognormal variance with pedigree 0.7001, pedigree (1,2,5,5,3)
  Scaling to Quebec diesel consumption
- Dinitrogen monoxide [air, non-urban air or from high stacks]: 0.00129242 kg; lognormal variance with pedigree 0.1001, pedigree (1,2,5,5,3)
  Scaling to Quebec diesel consumption
- Methane, fossil [air, non-urban air or from high stacks]: 0.00138904 kg; lognormal variance with pedigree 0.1001, pedigree (1,2,5,5,3)
  Scaling to Quebec diesel consumption
- NMVOC, non-methane volatile organic compounds [air, non-urban air or from high stacks]: 0.0433624 kg; lognormal variance with pedigree 0.084, pedigree (1,4,5,5,1)
  Scaling to Quebec diesel consumption
- Nickel II [air, non-urban air or from high stacks]: 7.525e-7 kg; lognormal variance with pedigree 0.7001, pedigree (1,2,5,5,3)
  Scaling to Quebec diesel consumption
- Nitrogen oxides [air, non-urban air or from high stacks]: 0.48677 kg; lognormal variance with pedigree 0.084, pedigree (1,4,5,5,1)
  Scaling to Quebec diesel consumption
- PAH, polycyclic aromatic hydrocarbons [air, non-urban air or from high stacks]: 3.53904e-5 kg; lognormal variance with pedigree 0.3601, pedigree (1,2,5,5,3)
  Scaling to Quebec diesel consumption
- Particulate Matter, < 2.5 um [air, non-urban air or from high stacks]: 0.00582191 kg; lognormal variance with pedigree 0.3601, pedigree (1,2,5,5,3)
  Scaling to Quebec diesel consumption
- Selenium IV [air, non-urban air or from high stacks]: 1.075e-7 kg; lognormal variance with pedigree 0.1001, pedigree (1,2,5,5,3)
  Scaling to Quebec diesel consumption
- Sulfur dioxide [air, non-urban air or from high stacks]: 0.0108466 kg; lognormal variance with pedigree 0.0601, pedigree (1,2,5,5,3)
  Scaling to Quebec diesel consumption
- Zinc II [air, non-urban air or from high stacks]: 1.075e-5 kg; lognormal variance with pedigree 0.7001, pedigree (1,2,5,5,3)
  Scaling to Quebec diesel consumption
- Cadmium II [soil, agricultural]: 1.25e-6 kg; lognormal variance with pedigree 0.084, pedigree (1,4,5,5,1)
  Emission from tyre abrasion, not related to diesel consumption
- Lead II [soil, agricultural]: 5.5e-6 kg; lognormal variance with pedigree 0.084, pedigree (1,4,5,5,1)
  Emission from tyre abrasion, not related to diesel consumption
- Zinc II [soil, agricultural]: 0.00328 kg; lognormal variance with pedigree 0.084, pedigree (1,4,5,5,1)
  Emission from tyre abrasion, not related to diesel consumption

## Sampling procedure
The inventoried HC, NOx, CO and fuel consumption values are measurements made following two test cycles (ISO 8178 C1 test and a specific 6-level-test created by the FAT) and on measurements made during the field work. The other emissions were calculated basing on literature data and the measured fuel consumption.

## Extrapolations
Values given in the reference are representative for the chosen work processes. Dataset based on GLO parent dataset which was extrapolated from CH geography context without modification of exchanges. Processes are typical procedures for Switzerland around the year 2000, they are not statistical average processes. This dataset has been adapted only for diesel input representative of the Quebec context and for combustion emissions scaled from the difference in diesel consumption. The uncertainty has been adjusted accordingly.

## Review by Thomas Nemecek 2013-11-19
The production volume must be updated, since the formula refers to a GLO PV, which has been changed meanwhile.

## Review by Christian Bauer 2013-11-19
passed
