# polyol production

Dataset: EcoSpold 2, unit process
Geography: RER
Time period: 1995-01-01 to 2022-12-31
Technology level: current
Classification: ISIC rev.4 ecoinvent: 2013:Manufacture of plastics and synthetic rubber in primary forms
Classification: EcoSpold01Categories: plastics/monomers
Synonyms: polyether-polyols; Polyether-Polyol
Tags: ConvertedDataset
Scenario: Business-as-Usual
System model: Allocation at the point of substitution
Generated by: Roland Hischier
Published in: Hischier R. 2007
Database: ecoinvent
isCopyrightProtected: true

## General comment
Data are derived from the Eco-profiles of the European plastics industry (PlasticsEurope). Not included are the values reported for: recyclable wastes, amount of air / N2 / O2 consumed, unspecified metal emission to air and to water, mercaptan emission to air, unspecified CFC/HCFC emission to air, dioxin to water. The amount of "sulphur (bonded)" is assumed to be included into the amount of raw oil.
[This dataset was already contained in the ecoinvent database version 2. It was not individually updated during the transfer to ecoinvent version 3. Life Cycle Impact Assessment results may still have changed, as they are affected by changes in the supply chain, i.e. in other datasets. This dataset was generated following the ecoinvent quality guidelines for version 2. It may have been subject to central changes described in the ecoinvent version 3 change report (http://www.ecoinvent.org/database/ecoinvent-version-3/reports-of-changes/), and the results of the central updates were reviewed extensively. The changes added e.g. consistent water flows and other information throughout the database. The documentation of this dataset can be found in the ecoinvent reports of version 2, which are still available via the ecoinvent website. The change report linked above covers all central changes that were made during the conversion process.]

## Included activities end
Aggregated data for all processes from raw material extraction until delivery at plant

## Geography
different European production sites

## Technology
production out of alcohols and epoxides by alkoxylation

## Time period
time to which data refer

## Parameters
- fraction, cooling water, cooling pond system, to air: 0.032 dimensionless; name fraction_CW_CP_to_air; lognormal variance with pedigree 0.0413, pedigree (2,3,1,3,1)
  Calculated based on literature value (Scown, C.D., 2011, Water Footprint of U.S. Transportation Fuels and supplying information of the article) (Vionnet, S., Quantis Water Database - Technical Report, 2012).
- fraction, cooling water, once-through system, to air: 0.004 dimensionless; name fraction_CW_OT_to_air; lognormal variance with pedigree 0.0413, pedigree (2,3,1,3,1)
  (same comment as for fraction, cooling water, cooling pond system, to air)
- fraction, cooling water, recirculating system, to air: 0.771 dimensionless; name fraction_CW_R_to_air; lognormal variance with pedigree 0.0413, pedigree (2,3,1,3,1)
  (same comment as for fraction, cooling water, cooling pond system, to air)
- fraction, cooling water, to air: 0.3875 dimensionless; name fraction_CW_to_air; = (0.5*fraction_CW_OT_to_air)+(0.5*fraction_CW_R_to_air); lognormal variance with pedigree 0.092025, pedigree (4,4,3,2,4)
  Calculated value based on literature value (see comments of the other parametres present in this dataset) and expert opinion. In the case when no industry/literature data are available about the type of cooling or directly fraction, cooling water, to air specific for the process a default assumption is applied. It is assumed that the once-through cooling system is used in 50% of all cases and recirculating system is used in another 50% of all cases.
- fraction, process water, to air: 0.205 dimensionless; name fraction_PW_to_air; lognormal variance with pedigree 0.092025, pedigree (4,4,3,2,4)
  Literature value (Statistics Canada, 2007 & Shaffer, K.H., 2008, Consumptive water use in the Great Lakes Basin, USGS) (Vionnet, S., Quantis Water Database - Technical Report, 2012).

## Reference product
- polyol: 1 kg; By-product classification allocatable product; CPC 347: Plastics in primary forms
  EcoSpold01Location=RER
  production volume 1.32237 kg
    This is a placeholder value that does not reflect real-world production volumes. This dataset does not currently require a real-world production volume to work in the database framework, and no actual data were collected yet. This has no negative effect on the results of the ecoinvent database. The placeholder value of this activity was scaled according to the nominal GDP of 2005 (source: United Nations, http://data.un.org/Glossary.aspx?q=GDP+%28current+US%24%29, accessed 20130726) to reflect an appropriate share of the global production volume, which is also a placeholder value.
  property carbon content, fossil 0.640856
    Polyols are the largest group of raw materials for the production of polyurethane, the polyols used within the polyurethane production are polyether-polyols (ecoinvent v2.2 report 11_II-part 12). The most important polyether polyols, with terminal hydroxyl groups are those which are produced by addition of cyclic ethers, especially propylene oxide (PO) and ethylene oxide (EO), to polyfunctional "starter" molecules. The following starters are used industrially : ethylene glycol, 1,2-propane diol, bisphenol A, trimethylolpropane, glycerol, pentaerythritol, sorbitol, sucrose, degraded starch, water, ethylenediamine and diaminotoluene. Monofunctional polyethers are usually started with 1-butanol (Polyurethanes, starting materials: Polyols, Ullmann). The structure of an average poyol was assumed as: CH3-(CH2)2-CH2-O-(CH2)2-CH-OH. Start is 1-butanol, monomer is PO, construction based in Fig 12.1 (ecoinvent v2.2 report 11_II-part 12), and information in Polyurethanes, starting materials: Polyols, Ullmann.
  property heating value, net 19.42 MJ
    LHV is calculated based on the Carbon content of the product. More details can be found on the respective documentation.
  properties: carbon allocation 0.640856 kg, carbon content 0.640856, carbon content, non-fossil 0, dry mass 1 kg, price 1.29 EUR2005, water content 0, water in wet mass 0 kg, wet mass 1 kg

## Inputs from technosphere
- average incineration residue: -0.034785 kg
  EcoSpold01Location=CH
  Uncertainty for LCI results cannot be determined
  production volume
    Calculated from the production volume of polyol in proportion to the respective output amounts.
  properties: carbon content, fossil 0.0325466, carbon content, non-fossil 0.0511208, dry mass 1 kg, wet mass 1 kg
  note on carbon content, fossil: Tab A.1, ecoinvent v2.2 report 13_I. It is considered that 61.1% of the C has a biogenic origin
- coal slurry: -0.00034365 kg
  EcoSpold01Location=GLO
  Uncertainty for LCI results cannot be determined
  production volume
    (same comment as for average incineration residue)
  properties: carbon content, fossil 0.124, dry mass 1 kg, wet mass 1 kg
  note on carbon content, fossil: Coal tailings composition in Tab 3.4, (Doka G. (2009) Life Cycle Inventory of the disposal of lignite spoil, coal spoil and coal tailings. Doka Life Cycle Assessments, Zurich. Commissioned by the Swiss Centre for Life Cycle Inventories ecoinvent Centre)
- decommissioned chemical production facilities: -9.0403e-5 kg
  Uncertainty for LCI results cannot be determined
  EcoSpold01Location=RER
  production volume
    (same comment as for average incineration residue)
  properties: carbon content, fossil 0.0169382, carbon content, non-fossil 5.78006e-6, dry mass 1 kg, wet mass 1 kg
  note on carbon content, fossil: Calculated from C content in input materials in the infrastructure
- hazardous waste, for incineration: -0.0561717, -0.00146829 kg (2 suppliers, which the file names only by identifier); sum of these -0.05764 kg
  Uncertainty for LCI results cannot be determined
  EcoSpold01Location=CH
  production volume
    (same comment as for average incineration residue)
  properties: carbon content, fossil 0.554667, dry mass 0.75 kg, heating value, net 17 MJ, water content 0.333333, wet mass 1 kg
  note on carbon content, fossil: Tab A.6, ecoinvent v2.2 report 13_I. C content has been calculated after data in the tables, and then referred to 1 kg DM
  note on heating value, net: Value taken from the general comment of the treatment dataset.
- municipal solid waste: -0.04365 kg
  Uncertainty for LCI results cannot be determined
  EcoSpold01Location=CH
  production volume
    (same comment as for average incineration residue)
  properties: carbon content, fossil 0.171549, carbon content, non-fossil 0.261655, dry mass 0.771 kg, heating value, net 11.74 MJ, water content 0.297017, wet mass 1 kg
  note on carbon content, fossil: MSW composition in tab 4.1, ecoinvent v2.2 report 13_I. C content referred to 1 kg DM
- spoil from hard coal mining: -0.21571 kg
  Uncertainty for LCI results cannot be determined
  EcoSpold01Location=GLO
  production volume
    (same comment as for average incineration residue)
  properties: carbon content, fossil 0.007879, dry mass 1 kg, wet mass 1 kg
  note on carbon content, fossil: Composition of coal spoil is adopted by proxy from lignite spoil (pg 19, Doka G. (2009) Life Cycle Inventory of the disposal of lignite spoil, coal spoil and coal tailings. Doka Life Cycle Assessments, Zurich. Commissioned by the Swiss Centre for Life Cycle Inventories ecoinvent Centre)
- waste plastic, mixture: -0.00021545 kg
  Uncertainty for LCI results cannot be determined
  EcoSpold01Location=CH
  production volume
    (same comment as for average incineration residue)
  properties: carbon content, fossil 0.747344, dry mass 0.847 kg, heating value, net 30.79 MJ, water content 0.180638, wet mass 1 kg
  note on carbon content, fossil: C content in 1 kg DM was calculated using data in Tab A.2, ecoinvent v2.2 report 13_I
- waste wood, untreated: -9.6282e-6 kg
  EcoSpold01Location=CH
  Uncertainty for LCI results cannot be determined
  production volume
    (same comment as for average incineration residue)
  properties: carbon content, non-fossil 0.48632, dry mass 0.8 kg, heating value, net 13.99 MJ, water content 0.25, wet mass 1 kg
  note on carbon content, non-fossil: Tab A.4, ecoinvent v2.2 report 13_I. C content has been referred to 1 kg DM,

## Inputs from nature
- Aluminium [natural resource, in ground]: 0.00037534 kg
  24% Al in bauxite; 11% Al in ore; Uncertainty for LCI results cannot be determined
- Anhydrite [natural resource, in ground]: 8.7812e-6 kg
  Uncertainty for LCI results cannot be determined
- Barium [natural resource, in ground]: 0.00047506 kg
  15% BaSO4 in ore; Uncertainty for LCI results cannot be determined
- Calcite [natural resource, in ground]: 0.55365 kg
  Uncertainty for LCI results cannot be determined
- Chromium [natural resource, in ground]: 9.2628e-6 kg
  25.5% Cr in chromite; 11.6% in ore; Uncertainty for LCI results cannot be determined
- Clay, bentonite [natural resource, in ground]: 8.8804e-5 kg
  Uncertainty for LCI results cannot be determined
- Clay, unspecified [natural resource, in ground]: 5.4679e-6 kg
  Uncertainty for LCI results cannot be determined
- Coal, brown [natural resource, in ground]: 0.029033 kg
  Uncertainty for LCI results cannot be determined
- Coal, hard, unspecified [natural resource, in ground]: 0.28343 kg
  Uncertainty for LCI results cannot be determined
- Copper [natural resource, in ground]: 1.4033e-7 kg
  0.99% Cu in sulfide; 0.36% Cu and 82 ppm Mo in ore; Uncertainty for LCI results cannot be determined
- Dolomite [natural resource, in ground]: 0.00042812 kg
  Uncertainty for LCI results cannot be determined
- Energy, gross calorific value, in biomass [natural resource, biotic]: 3.7068 MJ
- Energy, potential (in hydropower reservoir), converted [natural resource, in water]: 0.55802 MJ
- Feldspar [natural resource, in ground]: 0.00076825 kg
  Uncertainty for LCI results cannot be determined
- Fluorspar [natural resource, in ground]: 2.8649e-5 kg
  92% CaF2 in ore; Uncertainty for LCI results cannot be determined
- Gas, natural [natural resource, in ground]: 0.91484 Sm3
  Uncertainty for LCI results cannot be determined
- Granite [natural resource, in ground]: 1.8544e-13 kg
  Uncertainty for LCI results cannot be determined
- Gravel [natural resource, in ground]: 5.1027e-6 kg
  Uncertainty for LCI results cannot be determined
- Iron [natural resource, in ground]: 0.0013939 kg
  46% Fe in siderite; 25% Fe in ore; Uncertainty for LCI results cannot be determined
- Lead [natural resource, in ground]: 3.096e-6 kg
  5.0% Pb in sulfide; 3.0% Pb in ore; Uncertainty for LCI results cannot be determined
- Magnesite [natural resource, in ground]: 1.094e-8 kg
  60% Magnesite in ore; Uncertainty for LCI results cannot be determined
- Manganese [natural resource, in ground]: 1.7838e-6 kg
  35.7% Mn in sedimentary deposit; 14.2% Mn in ore; Uncertainty for LCI results cannot be determined
- Mercury [natural resource, in ground]: 2.3887e-6 kg
  Uncertainty for LCI results cannot be determined
- Nickel [natural resource, in ground]: 3.2517e-8 kg
  1.98% Ni in silicates; 1.04% Ni in ore; Uncertainty for LCI results cannot be determined
- Oil, crude [natural resource, in ground]: 0.8017 kg
  Uncertainty for LCI results cannot be determined
- Olivine [natural resource, in ground]: 1.2975e-5 kg
  Uncertainty for LCI results cannot be determined
- Peat [natural resource, biotic]: 0.00015294 kg
  Uncertainty for LCI results cannot be determined
- Phosphorus [natural resource, in ground]: 0.0011017 kg
  18% P in apatite; 12% in ore; Uncertainty for LCI results cannot be determined
- Sand, unspecified [natural resource, in ground]: 0.0023352 kg
  Uncertainty for LCI results cannot be determined
- Shale [natural resource, in ground]: 2.486e-5 kg
  Uncertainty for LCI results cannot be determined
- Sodium chloride [natural resource, in ground]: 1.9573 kg
  Uncertainty for LCI results cannot be determined
- Sodium nitrate [natural resource, in ground]: 5.8199e-13 kg
  Uncertainty for LCI results cannot be determined
- Sulfur [natural resource, in ground]: 0.002124 kg
  Uncertainty for LCI results cannot be determined
- Sylvite [natural resource, in ground]: 0.012874 kg
  25% Sylvite in sylvinite; Uncertainty for LCI results cannot be determined
- Talc [natural resource, in ground]: 2.3883e-26 kg
  Uncertainty for LCI results cannot be determined
- Titanium [natural resource, in ground]: 2.443e-9 kg
  95% TiO2 in rutile; 0.4% TiO2 in ore; Uncertainty for LCI results cannot be determined
- Uranium [natural resource, in ground]: 1.8728e-5 kg
  Uncertainty for LCI results cannot be determined
- Water, cooling, unspecified natural origin [natural resource, in water]: 0.29685 m3; name water_cooling_UNO_input; lognormal variance with pedigree 1.21, pedigree (5,5,5,5,5)
  Uncertainty for LCI results cannot be determined
- Water, river [natural resource, in water]: 0.042727 m3; name water_river_input; lognormal variance with pedigree 1.21, pedigree (5,5,5,5,5)
  Uncertainty for LCI results cannot be determined
- Water, salt, ocean [natural resource, in water]: 0.00068971 m3; name water_salt_ocean_input; lognormal variance with pedigree 1.21, pedigree (5,5,5,5,5)
  Uncertainty for LCI results cannot be determined
- Water, unspecified natural origin [natural resource, in water]: 0.012312 m3; name water_UNO_input; lognormal variance with pedigree 1.21, pedigree (5,5,5,5,5)
  Uncertainty for LCI results cannot be determined
- Water, well, in ground [natural resource, in water]: 1.6945e-5 m3; name water_well_in_ground_input; lognormal variance with pedigree 1.21, pedigree (5,5,5,5,5)
  Uncertainty for LCI results cannot be determined
- Wood, unspecified, standing [natural resource, biotic]: 1.0245e-6 m3
  Uncertainty for LCI results cannot be determined
- Zinc [natural resource, in ground]: 1.0596e-6 kg
  9.0% Zn in sulfide; 5.3% Zn in ore; Uncertainty for LCI results cannot be determined

## Emissions to nature
- Aldehydes, unspecified [air, urban air close to ground]: 5.9132e-8 kg
  Uncertainty for LCI results cannot be determined
- Ammonia [air, urban air close to ground]: 0.00024642 kg
  Uncertainty for LCI results cannot be determined
- Antimony ion [air, urban air close to ground]: 2.5943e-12 kg
  Uncertainty for LCI results cannot be determined
- Arsenic ion [air, urban air close to ground]: 4.0284e-11 kg
  Uncertainty for LCI results cannot be determined
- Benzene [air, urban air close to ground]: 9.3689e-8 kg
  Uncertainty for LCI results cannot be determined
- Benzene, ethyl- [air, urban air close to ground]: 8.1585e-9 kg
  Uncertainty for LCI results cannot be determined
- Cadmium II [air, urban air close to ground]: 8.896e-11 kg
  Uncertainty for LCI results cannot be determined
- Carbon dioxide, fossil [air, urban air close to ground]: 2.8249 kg
  Uncertainty for LCI results cannot be determined
- Carbon dioxide, non-fossil [air, urban air close to ground]: 0.080031 kg
  Uncertainty for LCI results cannot be determined
- Carbon disulfide [air, urban air close to ground]: 1.8922e-6 kg
  Uncertainty for LCI results cannot be determined
- Carbon monoxide, fossil [air, urban air close to ground]: 0.0035705 kg
  Uncertainty for LCI results cannot be determined
- Carbon monoxide, non-fossil [air, urban air close to ground]: 0.00010115 kg
  Uncertainty for LCI results cannot be determined
- Chlorine [air, urban air close to ground]: 0.00038897 kg
  Uncertainty for LCI results cannot be determined
- Chloroethylene [air, urban air close to ground]: 3.9814e-9 kg
  Uncertainty for LCI results cannot be determined
- Chromium III [air, urban air close to ground]: 1.5005e-8 kg
  Uncertainty for LCI results cannot be determined
- Copper ion [air, urban air close to ground]: 7.6934e-11 kg
  Uncertainty for LCI results cannot be determined
- Cyanide [air, urban air close to ground]: 3.0511e-12 kg
  Uncertainty for LCI results cannot be determined
- Dinitrogen monoxide [air, urban air close to ground]: 2.7202e-5 kg
  Uncertainty for LCI results cannot be determined
- Dioxins, measured as 2,3,7,8-tetrachlorodibenzo-p-dioxin [air, urban air close to ground]: 6.1847e-26 kg
  Uncertainty for LCI results cannot be determined
- Ethane, 1,2-dichloro- [air, urban air close to ground]: 2.5513e-9 kg
  Uncertainty for LCI results cannot be determined
- Ethylene [air, urban air close to ground]: 8.7736e-7 kg
  Uncertainty for LCI results cannot be determined
- Fluorine [air, urban air close to ground]: 5.3036e-8 kg
  Uncertainty for LCI results cannot be determined
- Hydrocarbons, aliphatic, alkanes, cyclic [air, urban air close to ground]: 2.3679e-6 kg
  Uncertainty for LCI results cannot be determined
- Hydrocarbons, aromatic [air, urban air close to ground]: 1.4198e-5 kg
  Uncertainty for LCI results cannot be determined
- Hydrocarbons, chlorinated [air, urban air close to ground]: 1.7302e-5 kg
  Uncertainty for LCI results cannot be determined
- Hydrochloric acid [air, urban air close to ground]: 0.00015174 kg
  Uncertainty for LCI results cannot be determined
- Hydrogen [air, urban air close to ground]: 0.0020051 kg
  Uncertainty for LCI results cannot be determined
- Hydrogen fluoride [air, urban air close to ground]: 5.5093e-6 kg
  Uncertainty for LCI results cannot be determined
- Hydrogen sulfide [air, urban air close to ground]: 2.2012e-7 kg
  Uncertainty for LCI results cannot be determined
- Lead II [air, urban air close to ground]: 1.1355e-9 kg
  Uncertainty for LCI results cannot be determined
- Mercury II [air, urban air close to ground]: 1.9848e-7 kg
  Uncertainty for LCI results cannot be determined
- Methane, dichloro-, HCC-30 [air, urban air close to ground]: 1.0522e-7 kg
  Uncertainty for LCI results cannot be determined
- Methane, fossil [air, urban air close to ground]: 0.026119 kg
  Uncertainty for LCI results cannot be determined
- Methane, non-fossil [air, urban air close to ground]: 0.00073996 kg
  Uncertainty for LCI results cannot be determined
- NMVOC, non-methane volatile organic compounds [air, urban air close to ground]: 0.0035407 kg
  Uncertainty for LCI results cannot be determined
- Nickel II [air, urban air close to ground]: 2.7009e-8 kg
  Uncertainty for LCI results cannot be determined
- Nitrogen oxides [air, urban air close to ground]: 0.0071172 kg
  Uncertainty for LCI results cannot be determined
- Particulate Matter, < 2.5 um [air, urban air close to ground]: 0.0018228 kg
  Uncertainty for LCI results cannot be determined
- Particulate Matter, > 10 um [air, urban air close to ground]: 0.0023332 kg
  Uncertainty for LCI results cannot be determined
- Particulate Matter, > 2.5 um and < 10um [air, urban air close to ground]: 0.0031352 kg
  Uncertainty for LCI results cannot be determined
- Propene [air, urban air close to ground]: 6.4984e-7 kg
  Uncertainty for LCI results cannot be determined
- Selenium IV [air, urban air close to ground]: 2.6266e-14 kg
  Uncertainty for LCI results cannot be determined
- Silver I [air, urban air close to ground]: 7.5853e-13 kg
  Uncertainty for LCI results cannot be determined
- Styrene [air, urban air close to ground]: 3.366e-9 kg
  Uncertainty for LCI results cannot be determined
- Sulfate [air, urban air close to ground]: 6.7729e-7 kg
  Uncertainty for LCI results cannot be determined
- Sulfur dioxide [air, urban air close to ground]: 0.0082531 kg
  Uncertainty for LCI results cannot be determined
- Toluene [air, urban air close to ground]: 1.5264e-8 kg
  Uncertainty for LCI results cannot be determined
- Water [air, unspecified]: 0.126457 m3; name water_to_air_unspecified; = (water_cooling_UNO_input*fraction_CW_to_air)+(water_river_input*fraction_PW_to_air)+(water_salt_ocean_input*fraction_PW_to_air)+(water_UNO_input*fraction_PW_to_air)+(water_well_in_ground_input*fraction_PW_to_air); lognormal variance with pedigree 0.0807, pedigree (2,2,5,1,1)
  Calculated value based on literature values and expert opinion. See comments in the parametres' comment field.
  property fraction, origin: fresh water 0.0692923; name fraction_origin_fresh_water
  property fraction, origin: salt water 0.00111809; name fraction_origin_salt_water
  property fraction, origin: unspecified 0.92959; name fraction_origin_unspecified
- Xylene [air, urban air close to ground]: 6.2762e-9 kg
  Uncertainty for LCI results cannot be determined
- Zinc II [air, urban air close to ground]: 7.3322e-10 kg
  Uncertainty for LCI results cannot be determined
- AOX, Adsorbable Organic Halogen [water, surface water]: 3.1864e-5 kg
  Uncertainty for LCI results cannot be determined
- Acidity, unspecified [water, surface water]: 6.1397e-6 kg
  Uncertainty for LCI results cannot be determined
- Aluminium III [water, surface water]: 8.8847e-7 kg
  Uncertainty for LCI results cannot be determined
- Ammonium [water, surface water]: 6.935e-6 kg
  Uncertainty for LCI results cannot be determined
- Arsenic ion [water, surface water]: 9.7777e-10 kg
  Uncertainty for LCI results cannot be determined
- BOD5, Biological Oxygen Demand [water, surface water]: 0.00067281 kg
  Uncertainty for LCI results cannot be determined
- Benzene [water, surface water]: 6.2323e-10 kg
  Uncertainty for LCI results cannot be determined
- Bromate [water, surface water]: 1.3922e-7 kg
  Uncertainty for LCI results cannot be determined
- COD, Chemical Oxygen Demand [water, surface water]: 0.0035648 kg
  Uncertainty for LCI results cannot be determined
- Cadmium II [water, surface water]: 5.7173e-12 kg
  Uncertainty for LCI results cannot be determined
- Calcium II [water, surface water]: 0.14662 kg
  Uncertainty for LCI results cannot be determined
- Carbonate [water, surface water]: 0.0023393 kg
  Uncertainty for LCI results cannot be determined
- Chlorate [water, surface water]: 0.00013054 kg
  Uncertainty for LCI results cannot be determined
- Chloride [water, surface water]: 1.1359 kg
  Uncertainty for LCI results cannot be determined
- Chlorinated solvents, unspecified [water, surface water]: 7.2531e-7 kg
  Uncertainty for LCI results cannot be determined
- Chlorine [water, surface water]: 1.0712e-6 kg
  Uncertainty for LCI results cannot be determined
- Chloroethylene [water, surface water]: 5.6336e-11 kg
  Uncertainty for LCI results cannot be determined
- Chromium III [water, surface water]: 1.0282e-5 kg
  Uncertainty for LCI results cannot be determined
- Copper ion [water, surface water]: 1.311e-7 kg
  Uncertainty for LCI results cannot be determined
- Cyanide [water, surface water]: 1.3505e-10 kg
  Uncertainty for LCI results cannot be determined
- DOC, Dissolved Organic Carbon [water, surface water]: 0.00098044 kg
  Calculated as equal to TOC.
- Dissolved solids [water, surface water]: 0.0086267 kg
  Uncertainty for LCI results cannot be determined
- Ethane, 1,2-dichloro- [water, surface water]: 4.677e-12 kg
  Uncertainty for LCI results cannot be determined
- Fluoride [water, surface water]: 8.0635e-7 kg
  Uncertainty for LCI results cannot be determined
- Hydrocarbons, unspecified [water, surface water]: 0.0005713 kg
  Uncertainty for LCI results cannot be determined
- Iron ion [water, surface water]: 1.0699e-5 kg
  Uncertainty for LCI results cannot be determined
- Lead II [water, surface water]: 4.9804e-9 kg
  Uncertainty for LCI results cannot be determined
- Magnesium [water, surface water]: 0.00020774 kg
  Uncertainty for LCI results cannot be determined
- Manganese II [water, surface water]: 5.0146e-11 kg
  Uncertainty for LCI results cannot be determined
- Mercury II [water, surface water]: 3.4479e-8 kg
  Uncertainty for LCI results cannot be determined
- Molybdenum VI [water, surface water]: 5.6937e-12 kg
  Uncertainty for LCI results cannot be determined
- Nickel II [water, surface water]: 1.0414e-7 kg
  Uncertainty for LCI results cannot be determined
- Nitrate [water, surface water]: 0.0059765 kg
  Uncertainty for LCI results cannot be determined
- Nitrogen [water, surface water]: 0.002221 kg
  Uncertainty for LCI results cannot be determined
- Oils, unspecified [water, surface water]: 3.6927e-6 kg
  Uncertainty for LCI results cannot be determined
- Phenol [water, surface water]: 4.3754e-7 kg
  Uncertainty for LCI results cannot be determined
- Phosphorus [water, surface water]: 0.00042392 kg
  Uncertainty for LCI results cannot be determined
- Potassium I [water, surface water]: 0.00017459 kg
  Uncertainty for LCI results cannot be determined
- Silicon [water, surface water]: 4.1271e-10 kg
  Uncertainty for LCI results cannot be determined
- Sodium I [water, surface water]: 0.59581 kg
  Uncertainty for LCI results cannot be determined
- Strontium [water, surface water]: 1.6545e-9 kg
  Uncertainty for LCI results cannot be determined
- Sulfate [water, surface water]: 0.0040268 kg
  Uncertainty for LCI results cannot be determined
- Sulfide [water, surface water]: 2.7248e-9 kg
  Uncertainty for LCI results cannot be determined
- Suspended solids, unspecified [water, surface water]: 0.054811 kg
  Uncertainty for LCI results cannot be determined
- TOC, Total Organic Carbon [water, surface water]: 0.00098044 kg
  Uncertainty for LCI results cannot be determined
- Tin ion [water, surface water]: 3.0388e-13 kg
  Uncertainty for LCI results cannot be determined
- Water [water, unspecified]: 0.226138 m3; name water_to_water_unspecified; = water_cooling_UNO_input*(1-fraction_CW_to_air)+water_river_input*(1-fraction_PW_to_air)+water_salt_ocean_input*(1-fraction_PW_to_air)+water_UNO_input*(1-fraction_PW_to_air)+water_well_in_ground_input*(1-fraction_PW_to_air); lognormal variance with pedigree 0.0807, pedigree (2,2,5,1,1)
  (same comment as for Water)
  property carbon content, fossil 0; name C_content_fossil
  property carbon content, non-fossil 0; name C_content_non_fossil
  property fraction, origin: fresh water 0.150268; name fraction_origin_fresh_water_Ww
  property fraction, origin: salt water 0.00242471; name fraction_origin_salt_water_Ww
  property fraction, origin: unspecified 0.847307; name fraction_origin_unspecified_Ww
  property water in wet mass 1000 kg; name WWM
- Zinc II [water, surface water]: 2.3609e-6 kg
  Uncertainty for LCI results cannot be determined

## Sampling procedure
literature values based on company survey

## Extrapolations
no extrapolation

## Review by Jürgen Sutter 2010-04-06
passed.
