# fibre cement roof slate production

Dataset: EcoSpold 2, unit process
Geography: RoW
Time period: 1991-01-01 to 2022-12-31
Technology level: current
Classification: EcoSpold01Categories: construction materials/coverings
Classification: ISIC rev.4 ecoinvent: 2395:Manufacture of articles of concrete, cement and plaster
Tags: ConvertedDataset
Scenario: Business-as-Usual
System model: Allocation at the point of substitution
Generated by: Daniel Kellenberger (obsolete)
Published in: Kellenberger D. 2004
Database: ecoinvent
isCopyrightProtected: true

## General comment
The amounts of raw materials are calculated based on the composition of fibre cement roof slate. Air emission data are lacking but emissions from the boilers are imported via the relevant modules. A certain amount of CO2 produced by the boiler is bound in the waste water. The amount of this entrained CO2 is inventoried with a negative value because it is an avoided emission. The total yearly is assumed to be 20'000 tonnes. The lifespan of the plant and the conveyor belt are assumed to be 50 years and 20 years, respectively.
[This dataset was already contained in the ecoinvent database version 2. It was not individually updated during the transfer to ecoinvent version 3. Life Cycle Impact Assessment results may still have changed, as they are affected by changes in the supply chain, i.e. in other datasets. This dataset was generated following the ecoinvent quality guidelines for version 2. It may have been subject to central changes described in the ecoinvent version 3 change report (http://www.ecoinvent.org/database/ecoinvent-version-3/reports-of-changes/), and the results of the central updates were reviewed extensively. The changes added e.g. consistent water flows and other information throughout the database. The documentation of this dataset can be found in the ecoinvent reports of version 2, which are still available via the ecoinvent website. The change report linked above covers all central changes that were made during the conversion process.]

## Included activities end
includes the whole manufacturing process to produce fibre cement products (raw material provision, raw material mixing, forming, post curing process coating process, and storage), transports to plant processes, and infrastructure. No acid for neutralisation of the wastewater and no requirements for administration are included.

## Geography
Data from one company in Switzerland (Eternit AG), for some exchanges RER- and OCE-modules have been used as proxy

## Technology
The raw materials are mixed with water to a homogeneous paste. Rotating sieving cylinders dip in this fibre cement mush which drain to the inside. Therefore the sieve surface gets covered with a layer of fleece of about 1mm which is transported with a conveyor belt. The produced endless mat is winded up on a format-cylinder until the demanded thickness is reached. With that process the fibres of the neighbour layers are interconnecting. After cutting up the mat cylinder the mat is detached from the format-cylinder and by punching and pressing automatically formed to small format slates, even and corrugated slabs.

## Parameters
- fraction, process water, to air: 0.15 dimensionless; lognormal variance with pedigree 0.092025, pedigree (4,4,3,2,4)
- fraction, tap water, to air: 0.15 dimensionless; lognormal variance with pedigree 0.092025, pedigree (4,4,3,2,4)

## Reference product
- fibre cement roof slate: 1 kg; name RP1; By-product classification allocatable product; CPC 37540: Tiles, flagstones, bricks and similar articles, of cement, concrete or artificial stone
  EcoSpold01Location=CH
  production volume 3.96633 kg
    This is a placeholder value that does not reflect real-world production volumes. This dataset does not currently require a real-world production volume to work in the database framework, and no actual data were collected yet. This has no negative effect on the results of the ecoinvent database.
  property carbon content, fossil 0.0141818
    Tab 5.1, ecoinvent v2.2 report 7, part IX. Fibres (pulp) 2.5%. Fibres (polyvinyl alcohol) 3.7%. C-content/dry mass of natural fibres was considered 46% (from "Evolutionary and Biochemical Aspects", A.D. Kay and T. Vrede (in Global Ecology, 2010, Elsevier B.V., S.E. Jørgensen Ed.)). C-content/dry mass of polyvinyl alcohol ((C2H4O)x) was considered =24/44.
  property carbon content, non-fossil 0.01288
    Tab 5.1, ecoinvent v2.2 report 7, part IX. Fibres (pulp) 2.8%. Fibres (polyvinyl alcohol) 2.6%. C-content/dry mass of natural fibres was considered 46% (from "Evolutionary and Biochemical Aspects", A.D. Kay and T. Vrede (in Global Ecology, 2010, Elsevier B.V., S.E. Jørgensen Ed.)). C-content/dry mass of polyvinyl alcohol ((C2H4O)x) was considered =24/44.
  property heating value, net 0 MJ
    Non combustible products are assumed to have an LHV equal to zero (0).
  properties: carbon allocation 0.0270618 kg, carbon content 0.0270618, dry mass 1 kg, price 1.77 EUR2005, water content 0, water in wet mass 0 kg, wet mass 1 kg

## Inputs from technosphere
- acrylic dispersion, with water, in 58% solution state: 0.0001524 kg
- acrylic varnish, with water, in 53% solution state: 5.00743e-5 kg
- aluminium scrap, post-consumer: -0.00318888 kg
- aluminium, wrought alloy: 0.00318888 kg
- chemical, inorganic: 1.4523e-5 kg
- chemical, organic: 1.4523e-5 kg
- chimney: 3.69469e-8 m
- corrugated board box: 0.00336341, 0.00780683, 0.000125287 kg (3 suppliers, which the file names only by identifier); sum of these 0.0112955 kg
- diesel, low-sulfur: 4.22332e-8, 1.01784e-6, 1.91271e-8, 2.8277e-9, 8.52422e-8, 4.26353e-8 kg (6 suppliers, which the file names only by identifier); sum of these 1.20991e-6 kg
- electricity, low voltage: 0.00260639, 0.00516526, 0.0496178, 0.000885107, 0.0177333, 0.00016096, 0.012292, 0.00361968 kWh (8 suppliers, which the file names only by identifier); sum of these 0.0920804 kWh
- electricity, medium voltage: 0.000809948, 0.00025273, 7.52629e-6, 3.84022e-5, 0.00231882, 0.000126836 kWh (6 suppliers, which the file names only by identifier); sum of these 0.00355426 kWh
- ethylene glycol monoethyl ether: 6.71073e-5 kg
- ethylene vinyl acetate copolymer: 0.000115337 kg
- extrusion, plastic film: 0.000682606 kg
- hazardous waste, for incineration: -9.68098e-5 kg
- heat, district or industrial, natural gas: 0.053926, 0.146021, 0.0023995 MJ (3 suppliers, which the file names only by identifier); sum of these 0.202346 MJ
- heavy fuel oil: 1.31736e-5, 1.1085e-7, 5.63541e-7, 7.30718e-7, 1.42205e-7, 1.90362e-7 kg (6 suppliers, which the file names only by identifier); sum of these 1.49113e-5 kg
- industrial furnace, 1MW, oil: 2.77105e-9 unit
- industrial furnace, natural gas: 1.54288e-8 unit
- industrial machine, heavy, unspecified: 2.79187e-5 kg
- isopropanol: 0.000279187 kg
- kraft paper: 0.0223377 kg
- light fuel oil: 6.80604e-6, 6.75553e-7, 6.49554e-8, 4.82726e-8, 4.48289e-8, 3.34724e-7 kg (6 suppliers, which the file names only by identifier); sum of these 7.97437e-6 kg
- maize starch: 0.00016947 kg
- municipal solid waste: -1.81133e-6, -6.52239e-7, -0.00128105, -4.56411e-7 kg (4 suppliers, which the file names only by identifier); sum of these -0.00128397 kg
- natural gas, high pressure: 1.1642e-6, 4.91414e-7, 2.81446e-6, 8.35225e-7, 4.72493e-5, 4.82926e-6, 5.27153e-7, 1.55555e-8, 1.87184e-6, 1.96565e-6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 m3 (24 suppliers, which the file names only by identifier); sum of these 0.000141289 m3
- oil storage, 3000l: 3.46376e-8 unit
- packaging box factory: 3.36259e-11 unit
- packaging film, low density polyethylene: 0.000564916 kg
- paper, woodfree, coated: 0.178014 kg
- polyethylene, high density, granulate: 0.000682606 kg
- potato starch: 0.000147443 kg
- printing ink, offset, without solvent, in 47.5% solution state: 0.00144375 kg
- sheet rolling, aluminium: 0.00318888 kg
- spent solvent mixture: -0.000138129, -5.39718e-5 kg (2 suppliers, which the file names only by identifier); sum of these -0.000192101 kg
- synthetic rubber: 2.2924e-5 kg
- textile, woven cotton: 3.6115e-5 kg
- thermoforming, with calendering: 5.09708e-5 kg
- waste emulsion paint: -3.30039e-5, -3.11109e-6 kg (2 suppliers, which the file names only by identifier); sum of these -3.6115e-5 kg
- waste paper, unsorted: -0.0252602, -0.0249731 kg (2 suppliers, which the file names only by identifier); sum of these -0.0502333 kg
- waste paperboard, unsorted: -0.00564777, -0.00564777 kg (2 suppliers, which the file names only by identifier); sum of these -0.0112955 kg
- waste plastic, mixture: -5.19422e-6, -2.62474e-8, -5.79106e-8, -3.63624e-5, -3.47058e-7, -1.36122e-7, -1.43347e-7 kg (7 suppliers, which the file names only by identifier); sum of these -4.22673e-5 kg
- white spirit: 0.000390605 kg

## Inputs from nature
- Water, unspecified natural origin [natural resource, in water]: 1.71358e-5 m3

## Emissions to nature
- 2-Propanol [air, urban air close to ground]: 0.000279187 kg
- Acetaldehyde [air, urban air close to ground]: 9.63221e-11 kg
- Acetic acid [air, urban air close to ground]: 1.18979e-9 kg
- Acetone [air, urban air close to ground]: 9.08118e-11 kg
- Ammonia [air, urban air close to ground]: 6.48775e-11 kg
- Arsenic ion [air, urban air close to ground]: 7.87036e-12 kg
- Benzene [air, urban air close to ground]: 2.20999e-9 kg
- Benzene, ethyl- [air, urban air close to ground]: 1.24097e-5 kg
- Benzo(a)pyrene [air, urban air close to ground]: 8.30346e-14 kg
- Butane [air, urban air close to ground]: 3.98072e-9 kg
- Calcium [air, urban air close to ground]: 6.65953e-11 kg
- Carbon dioxide, fossil [air, urban air close to ground]: 0.000385423 kg
- Carbon monoxide, fossil [air, urban air close to ground]: 1.73781e-8 kg
- Chromium III [air, urban air close to ground]: 2.99678e-12 kg
- Chromium VI [air, urban air close to ground]: 3.02705e-14 kg
- Cobalt II [air, urban air close to ground]: 1.99786e-11 kg
- Copper ion [air, urban air close to ground]: 2.84195e-10 kg
- Dinitrogen monoxide [air, urban air close to ground]: 1.27065e-9 kg
- Dioxins, measured as 2,3,7,8-tetrachlorodibenzo-p-dioxin [air, urban air close to ground]: 6.14214e-19 kg
- Ethanol [air, urban air close to ground]: 1.81624e-10 kg
- Formaldehyde [air, urban air close to ground]: 1.1764e-9 kg
- Heptane [air, urban air close to ground]: 0.000121408 kg
- Hydrocarbons, aliphatic, alkanes, unspecified [air, urban air close to ground]: 5.51482e-10 kg
- Hydrocarbons, aliphatic, unsaturated [air, urban air close to ground]: 1.81624e-11 kg
- Hydrocarbons, aromatic [air, urban air close to ground]: 1.02626e-10 kg
- Hydrochloric acid [air, urban air close to ground]: 9.08657e-10 kg
- Hydrogen fluoride [air, urban air close to ground]: 3.25893e-11 kg
- Iron ion [air, urban air close to ground]: 4.96438e-10 kg
- Lead II [air, urban air close to ground]: 8.77848e-11 kg
- Mercury II [air, urban air close to ground]: 4.52198e-13 kg
- Methane, fossil [air, urban air close to ground]: 1.3229e-8 kg
- Methanol [air, urban air close to ground]: 1.2807e-5 kg
- Molybdenum VI [air, urban air close to ground]: 4.8433e-12 kg
- Nickel II [air, urban air close to ground]: 2.96651e-10 kg
- Nitrogen oxides [air, urban air close to ground]: 1.78783e-7 kg
- PAH, polycyclic aromatic hydrocarbons [air, urban air close to ground]: 5.56814e-11 kg
- Particulate Matter, < 2.5 um [air, urban air close to ground]: 6.22674e-9 kg
- Particulate Matter, > 10 um [air, urban air close to ground]: 1.45299e-9 kg
- Particulate Matter, > 2.5 um and < 10um [air, urban air close to ground]: 7.26496e-10 kg
- Pentane [air, urban air close to ground]: 6.6947e-9 kg
- Propane [air, urban air close to ground]: 1.1281e-9 kg
- Propionic acid [air, urban air close to ground]: 1.10206e-10 kg
- Propylene oxide [air, urban air close to ground]: 2.33082e-5 kg
- Selenium IV [air, urban air close to ground]: 7.26496e-12 kg
- Sodium [air, urban air close to ground]: 4.5406e-10 kg
- Sulfur dioxide [air, urban air close to ground]: 2.59932e-7 kg
- Toluene [air, urban air close to ground]: 1.09637e-5 kg
- Vanadium V [air, urban air close to ground]: 6.05413e-10 kg
- Water [air, non-urban air or from high stacks]: 1.02156e-5 m3
- Xylene [air, urban air close to ground]: 1.09626e-5 kg
- Zinc II [air, urban air close to ground]: 3.07806e-10 kg
- BOD5, Biological Oxygen Demand [water, surface water]: 1.20709e-7 kg
- COD, Chemical Oxygen Demand [water, unspecified]: 9.67418e-6 kg
- DOC, Dissolved Organic Carbon [water, unspecified]: 3.58303e-6 kg
- TOC, Total Organic Carbon [water, unspecified]: 3.58303e-6 kg
- Water [water, unspecified]: 6.92022e-6 m3

## Sampling procedure
Literature and "ecological building material declaration" (a sort of environmental report)

## Extrapolations
See geography This dataset has been copied from an original dataset covering the geography CH. The uncertainty has been adjusted accordingly.

## Review by Roberto Dones 2004-04-14
passed
