# treatment of sewage sludge, 97% water, WWT, WW from glass production, landfarming

Dataset: EcoSpold 2, unit process
Geography: RoW
Time period: 2000-01-01 to 2022-12-31
Technology level: current
Classification: ISIC rev.4 ecoinvent: 3821:Treatment and disposal of non-hazardous waste
Scenario: Business-as-Usual
System model: Allocation at the point of substitution
Generated by: Nikolia Stoikou
Database: ecoinvent
isCopyrightProtected: true

## General comment
The process represents the treatment of a waste (sewage sludge) that is exclusively produced from another waste treatment. Recommended use of this dataset: to be used within the specific chain of treatments for 'wastewater from glass production'. Share of biogenic carbon in the sludge: 0%.

## Included activities start
The activity starts with the waste being available for landfarming. Collection and transportation of the waste to this process is not included.

## Included activities end
The activity ends with the waste being treated and waste-specific emissions from the landfarming process are released to the environment (air, water and soil). The activity is considering local fate of emissions and the initial specific wastewater composition (generating the sewage sludge). Further, it includes provision of fertiliser functions for N, P, K, if present in the sludge.

## Geography
The site has mean annual temperature (MAT) of 16.743579766537 degC, mean annual precipitation (MAP) of 1250.84108527132 mm/year, mean annual actual evaporation (EAT) of 460.58904958214 mm/year. Climate will influence the local fate emissions based on the elemental composition of the sludge as well as water evaporation to air (= consumptive water use).
References: UN data, 2020. Precipitation, Environment Statistics Database, United Nations Statistics Division Available at: http://data.un.org/Data.aspx?q=precipitation&d=ENV&f=variableID%3a6;
World Bank, 2022. Surface area (sq.km), World Bank Group Available at: https://data.worldbank.org/indicator/AG.SRF.TOTL.K2;
Doka G.,2021. A model for composition-specific life cycle inventories of regionalised wastewater fates, Zurich, Switzerland. http://www.doka.ch/publications.htm

## Technology
Landfarming is the process of spreading a substrate on agricultural soil. Sewage sludge is generated in the wastewater treatment of wastewater from glass production. Spreading of liquid sewage sludge (97w% water content) on agricultural fields with mobile vacuum tanker.

## Reference product
- organic nitrogen fertiliser, as N: 1 kg; By-product classification allocatable product; CPC 34659: Fertilizers n.e.c.; lognormal variance with pedigree 0.10292, pedigree (1,1,1,1,1)
  gross fertilizer function provided from sewage sludge spreading on agricultural fields.
  Uncertainty: Uncertainty calculated from upstream wastewater technosphere fate uncertainty, wastewater composition uncertainty, and treatment model uncertainty
  production volume 120101 kg
    Calculated in proportion to wastewater reference product.
  property nitrogen content 1
    Nitrogen content (on a dry matter basis) of organic nitrogen fertiliser, as N is calculated from the molecular formula of the substance (Nitrogen).
  property price 0.473 EUR2005
    Set equal to the price of the corresponding inorganic fertiliser
  properties: carbon allocation 0 kg, carbon content 0, carbon content, fossil 0, carbon content, non-fossil 0, dry mass 1 kg, water content 0, water in wet mass 0 kg, wet mass 1 kg

## Inputs from technosphere
- EUR-flat pallet: 0.000672801, 0.000287499 unit (2 suppliers, which the file names only by identifier); sum of these 0.0009603 unit
- chemical, inorganic: 0.0268445 kg
- diesel: 0.000130839, 6.48285e-5, 1.32465e-5, 9.16472e-6, 0.00129197, 3.11657e-6 kg (6 suppliers, which the file names only by identifier); sum of these 0.00151316 kg
- dolomite: 0.0581328, 0.0170225 kg (2 suppliers, which the file names only by identifier); sum of these 0.0751553 kg
- electricity, medium voltage: 0.00156098, 0.0043933, 0.000419965, 0.000116993, 0.00142741, 0.0475346, 0.000198203, 0.00754564, 0.0148323, 0.00946006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 kWh (44 suppliers, which the file names only by identifier); sum of these 0.29773 kWh
- feldspar: 0.0293705 kg
- glass cullet, sorted: 0.239033, 0.487289 kg (2 suppliers, which the file names only by identifier); sum of these 0.726323 kg
- graphite: 3.40553e-6 kg
- heavy fuel oil: 0.0327032, 0.000275183, 0.00139898, 0.00181399, 0.000353019, 0.000472568, 0.0158179 kg (7 suppliers, which the file names only by identifier); sum of these 0.0528348 kg
- light fuel oil: 0.030572, 0.0153065, 0.00303451, 0.000291773, 0.000216835, 0.000201367, 0.00150355 kg (7 suppliers, which the file names only by identifier); sum of these 0.0511265 kg
- lime: 0.0130059, 0.0418898 kg (2 suppliers, which the file names only by identifier); sum of these 0.0548957 kg
- lime, hydrated, loose weight: 0.000340477 kg
- lubricating oil: 2.03465e-5 kg
- municipal solid waste: -1.12696e-5, -3.5233e-5, -5.31779e-6, -6.63314e-6, -2.46704e-5, -5.17894e-5, -2.96211e-6, -4.49855e-6, -2.28639e-5, -3.96052e-5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 kg (38 suppliers, which the file names only by identifier); sum of these -0.00671112 kg
- natural gas, high pressure: 0.000644815, 0.00025135, 0.000272178, 0.00155884, 0.000462605, 0.0261699, 0.00267477, 0.000849389, 0.00182783, 0.00154539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 m3 (43 suppliers, which the file names only by identifier); sum of these 0.111696 m3
- packaging glass factory: 4.56637e-11, 1.06862e-10 unit (2 suppliers, which the file names only by identifier); sum of these 1.52525e-10 unit
- polyethylene, high density, granulate: 0.0157406 kg
- portachrom: 0.000211793 kg
- portafer: 0.000128685 kg
- refractory, fireclay, packed: 0.0174489 kg
- selenium: 5.14416e-6 kg
- silica sand: 0.293888 kg
- soda ash, light: 0.10577 kg
- solid bleached and unbleached board carton: 0.0164994, 0.00705047 kg (2 suppliers, which the file names only by identifier); sum of these 0.0235499 kg
- tap water: 0.000160184, 0.00667546, 0.00026473, 0.000493974, 0.0763906, 0.00017366, 0.00133073 kg (7 suppliers, which the file names only by identifier); sum of these 0.0854894 kg
- wastewater from glass production: -0.00214756 m3

## Inputs from nature
- Water, unspecified natural origin [natural resource, in water]: 0.002416 m3

## Emissions to nature
- Ammonia [air, urban air close to ground]: 2.23982e-8 kg
- Antimony ion [air, urban air close to ground]: 8.22417e-8 kg
- Arsenic ion [air, urban air close to ground]: 8.22417e-8 kg
- Benzene [air, urban air close to ground]: 1.28181e-6 kg
- Benzo(a)pyrene [air, urban air close to ground]: 1.22051e-10 kg
- Cadmium II [air, urban air close to ground]: 8.22417e-8 kg
- Carbon dioxide, fossil [air, urban air close to ground]: 0.671594 kg
- Carbon monoxide, fossil [air, urban air close to ground]: 2.80715e-5 kg
- Chromium III [air, urban air close to ground]: 8.22417e-8 kg
- Cobalt II [air, urban air close to ground]: 8.22417e-8 kg
- Copper ion [air, urban air close to ground]: 8.22417e-8 kg
- Dinitrogen monoxide [air, urban air close to ground]: 2.44092e-6 kg
- Dioxins, measured as 2,3,7,8-tetrachlorodibenzo-p-dioxin [air, urban air close to ground]: 1.52554e-15 kg
- Formaldehyde [air, urban air close to ground]: 1.73918e-6 kg
- Hydrocarbons, aliphatic, alkanes, unspecified [air, urban air close to ground]: 1.01732e-5 kg
- Hydrochloric acid [air, urban air close to ground]: 6.06441e-5 kg
- Hydrogen fluoride [air, urban air close to ground]: 2.19637e-5 kg
- Lead II [air, urban air close to ground]: 9.41997e-7 kg
- Manganese II [air, urban air close to ground]: 8.22417e-8 kg
- Methane, fossil [air, urban air close to ground]: 1.40353e-5 kg
- NMVOC, non-methane volatile organic compounds [air, urban air close to ground]: 3.77863e-6 kg
- Nickel II [air, urban air close to ground]: 8.22417e-8 kg
- Nitrogen oxides [air, urban air close to ground]: 0.00256243 kg
- Particulate Matter, < 2.5 um [air, urban air close to ground]: 0.000307491 kg
- Particulate Matter, > 10 um [air, urban air close to ground]: 1.95232e-5 kg
- Particulate Matter, > 2.5 um and < 10um [air, urban air close to ground]: 1.58626e-5 kg
- Selenium IV [air, urban air close to ground]: 8.94409e-6 kg
- Sulfur dioxide [air, urban air close to ground]: 0.0041975 kg
- Water [air, unspecified]: 0.000347095 m3
- AOX, Adsorbable Organic Halogen [water, surface water]: 8.54894e-8 kg
- BOD5, Biological Oxygen Demand [water, surface water]: 8.54894e-6 kg
- COD, Chemical Oxygen Demand [water, surface water]: 8.54894e-6 kg
- Copper ion [water, surface water]: 8.54894e-10 kg
- DOC, Dissolved Organic Carbon [water, surface water]: 8.54894e-6 kg
- Nitrite [water, surface water]: 8.54894e-8 kg
- Oils, unspecified [water, surface water]: 8.54894e-7 kg
- Sulfate [water, surface water]: 8.54894e-7 kg
- Suspended solids, unspecified [water, surface water]: 8.54894e-7 kg
- TOC, Total Organic Carbon [water, surface water]: 8.54894e-6 kg
- Water [water, unspecified]: 6.83915e-6 m3
- Zinc II [water, surface water]: 8.54894e-9 kg
