# drying of bread grain, seed and legumes

Dataset: EcoSpold 2, unit process
Geography: CH
Time period: 1985-01-01 to 2022-12-31
Technology level: current
Classification: ISIC rev.4 ecoinvent: 0163:Post-harvest crop activities
Classification: EcoSpold01Categories: agricultural means of production/work processes
Tags: ConvertedDataset
Scenario: Business-as-Usual
System model: Allocation at the point of substitution
Generated by: Silvio Blaser
Published in: Nemecek, T. 2007
Database: ecoinvent
isCopyrightProtected: true

## General comment
This dataset represents the drying process of bread grain, seeds and legumes. The functional unit is 1 kg of evaporated water. This module should be used when evaluating drying of bread grains, seeds and legumes.
[This dataset was already contained in the ecoinvent database version 2. It was not individually updated during the transfer to ecoinvent version 3. Life Cycle Impact Assessment results may still have changed, as they are affected by changes in the supply chain, i.e. in other datasets. This dataset was generated following the ecoinvent quality guidelines for version 2. It may have been subject to central changes described in the ecoinvent version 3 change report (http://www.ecoinvent.org/database/ecoinvent-version-3/reports-of-changes/), and the results of the central updates were reviewed extensively. The changes added e.g. consistent water flows and other information throughout the database. The documentation of this dataset can be found in the ecoinvent reports of version 2, which are still available via the ecoinvent website. The change report linked above covers all central changes that were made during the conversion process.]

## Included activities start
From reception of the raw material at the factory gate.

## Included activities end
This activity ends with the dried product. The dataset includes the energy demand, heat and electricity consumption, for evaporating 1 kg of water when drying grain at low temperature (80-90°C). Also included in the dataset is the infrastructure (building and machinery). The dataset doesn't include production of the wet raw material, waste and air emissions (like dust) from this process neither utilisation of the dried product.

## Geography
The inventories are based on indications made by drying plants in Switzerland and values given in international references (Western Europe).

## Technology
The inventoried process for grain consists in the drying process itself, cleaning (filtering and removing dust and foreign matter), weighing, removing awns and cooling; not included is the milling of the dried grain (Müller 2002). Drying is the most effective way of preserving bread grains. Drying time depends on the initial water content (a function of grain ripeness, grain moisture, air humidity and temperature). The inventories are based on common grain drying plants. Most of the grain-drying plants are equipped with mixed-flow or batch dryers (Häusermann, 2002). The technology of the mixed-flow / batch drying principle is described in Stela (2002) as follows: The product to be dried runs through the dryer from top to bottom due to the force of gravity. Horizontally arranged warm-air and exhaust-air ducts run through vertical product shafts. The optimally designed shape of the roof of these ducts guarantees the even flow of the product. The roof ducts are open downwards at full length. The warm air streams into the column at the front side of the warm air roofs and flows through the closely piled up product. The product warms up, delivers its water into the passing air and dries. As a countermovement, the air cools down and air humidity rises to saturation limit, depending on the product. The humid air escapes through the neighbouring exhaust-air roofs. This air is extracted from the dryer by the exhaust-air fan. The design of the roof ducts guarantees even product moisture and maximum protection of the product.
References
Müller, H. Trocknungs-Genossenschaft Strass, Frauenfeld, Switzerland, November 2002 (personal communication).

Häusermann, Th. (VGS). Seengen, Switzerland, July 2002 (personal communication).

Stela (2002) Tailor-made solutions. Website of Stela Laxhuber KG, Massing, Germany. Retrieved on April 2002 from http://www.stela.de/englisch/index.htm.

## Time period
Time of publication in literature and annual reports. Most publications between 2001 and 2002.

## Reference product
- drying of bread grain, seed and legumes: 1 l; By-product classification allocatable product; CPC 86111: Post-harvest crop services
  Calculated Value. Data are given for the functional unit 'evaporation of 1 kg of water'. This allows users to use their own data for water content before and after drying. To analyse e.g. the drying of 1200 kg of wheat from 18 to 14 % water content, a user should:
  1) Calculate the amount of water evaporated per kg: (0.14 - 0.18) / (0.18 - 1) = 0.05 kg water evaporated per kg dried product (formula Wevap = (We – Wi) / (Wi – 100)).
  2) Calculate the amount of water evaporated: 1200 kg * 0.05 kg = 60 kg of water evaporated.
  3) Link to the corresponding ecoinvent activity: 60 * activity 'drying of feed grain'.
  Calculated Value. Data are given for the functional unit 'evaporation of 1 kg of water'. This allows users to use their own data for water content before and after drying. To analyse e.g. the drying of 1200 kg of wheat from 18 to 14 % water content, a user should:
  1) Calculate the amount of water evaporated per kg: (0.14 - 0.18) / (0.18 - 1) = 0.05 kg water evaporated per kg dried product (formula Wevap = (We – Wi) / (Wi – 100)).
  2) Calculate the amount of water evaporated: 1200 kg * 0.05 kg = 60 kg of water evaporated.
  3) Link to the corresponding ecoinvent activity: 60 * activity 'drying of feed grain'.
  production volume 0.0336675 l
    This is a placeholder value that does not reflect real-world production volumes. This dataset does not currently require a real-world production volume to work in the database framework, and no actual data were collected yet. This has no negative effect on the results of the ecoinvent database. The placeholder value of this activity was scaled according to the nominal GDP of 2005 (source: United Nations, http://data.un.org/Glossary.aspx?q=GDP+%28current+US%24%29, accessed 20130726) to reflect an appropriate share of the global production volume, which is also a placeholder value.
  property price 0.193105 EUR2005
    Calculated based on inputs: The price of the product has been calculated as a sum of the values of the material and energy inputs for this product. This value is therefore a rough estimation. It may underestimate the real price since there are additional expenses when producing any product. These expences can include for example labour costs, treatment of waste materials and profit for the producer. Please consider carefully whether this level of data quality is acceptable for your application.
  properties: carbon allocation 0 kg, carbon content 0

## Inputs from technosphere
- building, hall: 6.7e-5 m2; = LiveLink('C:\Users\pts293\Desktop\demanded_amount_.infrastructure_20120618xlsx.xlsx','agriculture','F19','', 'Automatic'); source Th. Häusermann 2002; lognormal variance with pedigree 0.3421, pedigree (3,2,5,1,1)
  Estimation. A typical grain-drying plant consists of the dryer itself, built on a surface area of 150 square meters (about 12 m * 12 m), and up to four storeys in height (Häusermann 2002). Most plants do not have a storehouse. As with the drying plants for grass and maize, this surface is included as 'building, hall', with a lifetime of 50 years as well. The total surface area of a plant, including building surface and surroundings, was also estimated to be 3000 square meters (Häusermann 2002). The total surface area of a plant was also included for the building and dismantling phases as 'occupation, construction site'. The area of the building, and of the land transformation, calculated for one kilogram evaporated water, is obtained by dividing the total surface area of the building or of the environs by the annual yield of dried product, the water evaporated per kilogram of dried product and by the lifetime of the infrastructure.
  The capacity utilization rate is 4/12 (4 months per year)
  This exchange has an activity link directly to the producing activity because the product is primarily consumed in the same geographical area where it is produced.
- cast iron: 0.00583 kg; source W. Kunz 2002; lognormal variance with pedigree 0.056, pedigree (4,5,5,1,1)
  Estimation. An estimate of the total weight of the machines was made (40 tonnes for grain-drying plants) which was calculated as cast iron, the main component of this machinery (Kunz 2002, Walia 2002). The weight for the heater inventoried in this module (5 tonnes) was subtracted from the estimated weight of the machinery used in the drying process. The weight of the machinery, balanced as cast iron, per kilogram of water evaporated, was calculated in the same way as the area of the building and the land transformation. The expected useful life of the machinery was 25 years. Construction and Maintenance processes for the machinery were not included.
  Further References
  Personal communication from R. Walia, Wirtech AG. Uetendorf, Switzerland, November 2002.
  properties: carbon content, fossil 0.04, dry mass 1 kg, wet mass 1 kg
  note on carbon content, fossil: Cast iron is made by remelting pig iron in small furnaces (e.g. cupola furnaces or electric arc furnaces) and poured into moulds to make castings. It usually contains 2% to 6% carbon (ecoinvent v2.2 report 10_partII). An average content of 4% was considered
- electricity, low voltage: 1 kWh; lognormal variance with pedigree 0.058625, pedigree (2,5,5,2,1)
  Modelled, based on 'Grass Maize and Grain Drying' - pdf-document on the dedicated talk page of ecoinvent (www.ecoinvent.org/documentation)
  Modelled, based on 'Grass Maize and Grain Drying' - pdf-document on the dedicated talk page of ecoinvent (www.ecoinvent.org/documentation)
- heat, district or industrial, other than natural gas: 6.65 MJ; lognormal variance with pedigree 0.049225, pedigree (2,5,5,2,1)
  Modelled, based on 'Grass Maize and Grain Drying' - pdf-document on the dedicated talk page of ecoinvent (www.ecoinvent.org/documentation)
  properties: heating value, net 1 MJ

## Inputs from nature
- Occupation, construction site [natural resource, land]: 0.0375 m2*year; source Th. Häusermann 2002; lognormal variance with pedigree 0.0821, pedigree (3,2,5,1,1)
  Estimation. A typical grain-drying plant consists of the dryer itself, built on a surface area of 150 square meters (about 12 m * 12 m), and up to four storeys in height (Häusermann 2002). Most plants do not have a storehouse. As with the drying plants for grass and maize, this surface is included as 'building, hall', with a lifetime of 50 years as well. The total surface area of a plant, including building surface and surroundings, was also estimated to be 3000 square meters (Häusermann 2002). The total surface area of a plant was also included for the building and dismantling phases as 'occupation, construction site'. The area of the building, and of the land transformation, calculated for one kilogram evaporated water, is obtained by dividing the total surface area of the building or of the environs by the annual yield of dried product, the water evaporated per kilogram of dried product and by the lifetime of the infrastructure.
- Occupation, industrial area [natural resource, land]: 0.625 m2*year; source Th. Häusermann 2002; lognormal variance with pedigree 0.0821, pedigree (3,2,5,1,1)
  (same comment as for Occupation, construction site)
- Transformation, from pasture, man made [natural resource, land]: 0.00025 m2; lognormal variance with pedigree 0.1621, pedigree (3,2,5,1,1)
  Estimation. It was assumed that there was a transformation from 'pasture and meadow' occupancy to 'industrial area' occupancy. The area of the building, and of the land transformation, calculated for one kilogram evaporated water, is obtained by dividing the total surface area of the building or of the environs by the annual yield of dried product, the water evaporated per kilogram of dried product and by the lifetime of the infrastructure.
- Transformation, to industrial area [natural resource, land]: 0.00025 m2; lognormal variance with pedigree 0.1621, pedigree (3,2,5,1,1)
  (same comment as for Transformation, from pasture, man made)

## Extrapolations
Values are based partially on non verified measurements, on expert estimations and on international references.

## Review by Roland Hischier 2003-06-03
Passed.

## Review by Emilia Moreno Ruiz 2012-05-30
dataset documented by trainee Diego Lima Medeiros
