# treatment of redmud from bauxite digestion, residual material landfill

Dataset: EcoSpold 2, unit process
Geography: CH
Time period: 1994-01-01 to 2022-12-31
Technology level: current
Classification: ISIC rev.4 ecoinvent: 3822:Treatment and disposal of hazardous waste
Classification: EcoSpold01Categories: waste management/residual material landfill
Synonyms: red mud from aluminium hydroxyide extraction from bauxite; bauxite residue BR; red mud from alumina production from bauxite
Tags: Treatment; ConvertedDataset
Scenario: Business-as-Usual
System model: Allocation at the point of substitution
Generated by: Gabor Doka (obsolete)
Published in: Doka G. 2009
Database: ecoinvent
isCopyrightProtected: true

## General comment
Inventoried waste contains 100% redmud from bauxite digestion; .
waste composition (wet, in ppm): H2O n.a.; O 379730; H n.a.; C 7606.7; S 800; N n.a.; P 1475; B 10; Cl n.a.; Br n.a.; F 1130; I n.a.; Ag n.a.; As 29; Ba n.a.; Cd 4.5; Co 22; Cr 750.97; Cu 36.742; Hg 0.025; Mn 363.32; Mo n.a.; Ni 5.4; Pb 14.142; Sb 0.3; Se 5; Sn n.a.; V 535.08; Zn 36.661; Be 0.7; Sc n.a.; Sr n.a.; Ti 40203; Tl n.a.; W n.a.; Si 104470; Fe 296420; Ca 22446; Al 84217; K n.a.; Mg n.a.; Na 59688;
Share of carbon in waste that is biogenic 0%.

[This dataset was already contained in the ecoinvent database version 2. It was not individually updated during the transfer to ecoinvent version 3. Life Cycle Impact Assessment results may still have changed, as they are affected by changes in the supply chain, i.e. in other datasets. This dataset was generated following the ecoinvent quality guidelines for version 2. It may have been subject to central changes described in the ecoinvent version 3 change report (http://www.ecoinvent.org/database/ecoinvent-version-3/reports-of-changes/), and the results of the central updates were reviewed extensively. The changes added e.g. consistent water flows and other information throughout the database. The documentation of this dataset can be found in the ecoinvent reports of version 2, which are still available via the ecoinvent website. The change report linked above covers all central changes that were made during the conversion process.]

## Included activities end
Waste-specific short-term emissions to water from leachate. Long-term emissions from landfill to ground water.

## Geography
Technology encountered in Switzerland in 2000. Landfill includes base seal and leachate collection system.

## Technology
Swiss residual material landfill for polluted, inorganic waste. With base seal and leachate collection system. Recultivation after closure.

## Time period
Waste composition as given in literature reference, theoretical data or other source. Transfer coefficients from prospective model.

## Reference product
- redmud from bauxite digestion: -1 kg; By-product classification Waste; CPC 39990: Other wastes n.e.c.
  EcoSpold01Location=CH
  production volume 0.0336675 kg
    This is a placeholder value that does not reflect real-world production volumes. This dataset does not currently require a real-world production volume to work in the database framework, and no actual data were collected yet. This has no negative effect on the results of the ecoinvent database. The placeholder value of this activity was scaled according to the nominal GDP of 2005 (source: United Nations, http://data.un.org/Glossary.aspx?q=GDP+%28current+US%24%29, accessed 20130726) to reflect an appropriate share of the global production volume, which is also a placeholder value.
  property heating value, net 0 MJ
    Non combustible products are assumed to have an LHV equal to zero (0).
  property price 0 EUR2005
    Waste products are assigned a price of zero as they are assumed to require further treatment.
  properties: carbon allocation 0.0076067 kg, carbon content 0.0076067, carbon content, fossil 0.0076067, carbon content, non-fossil 0, dry mass 1 kg, water content 0, water in wet mass 0 kg, wet mass 1 kg

## Inputs from technosphere
- process-specific burdens, residual material landfill: 1 kg; lognormal variance with pedigree 0.04, pedigree (1,1,5,1,1)
  demands per kilogram waste. uncertainty is heeded in the module;activityLink introduced to establish a direct link to the corresponding regional supply of this product
  EcoSpold01Location=CH
- residual material landfill: 2.0833e-9 unit; lognormal variance with pedigree 0.04, pedigree (1,1,5,1,1)
  demands per kilogram waste. uncertainty is heeded in the module
  EcoSpold01Location=CH

## Emissions to nature
- Aluminium III [water, ground-, long-term]: 0.025 kg; lognormal variance with pedigree 0.55, pedigree (1,1,5,1,1)
  uncertainty is calculated from uncertainties in waste composition and transfer coefficients in incinerator and landfills.
- Aluminium III [water, surface water]: 4.1736e-5 kg; lognormal variance with pedigree 0.92, pedigree (1,1,5,1,1)
  uncertainty is calculated from uncertainties in waste composition and transfer coefficients in residual landfill
- Antimony ion [water, ground-, long-term]: 1.942e-7 kg; lognormal variance with pedigree 1.77, pedigree (1,1,5,1,1)
  (same comment as for Aluminium III)
- Antimony ion [water, surface water]: 1.058e-7 kg; lognormal variance with pedigree 1.79, pedigree (1,1,5,1,1)
  (same comment as for Aluminium III)
- Arsenic ion [water, ground-, long-term]: 2.9e-14 kg; lognormal variance with pedigree 1.19, pedigree (1,1,5,1,1)
  (same comment as for Aluminium III)
- Arsenic ion [water, surface water]: 2.9e-5 kg; lognormal variance with pedigree 1.17, pedigree (1,1,5,1,1)
  (same comment as for Aluminium III)
- BOD5, Biological Oxygen Demand [water, ground-, long-term]: 0.0040636 kg; lognormal variance with pedigree 0.49, pedigree (1,1,5,1,1)
  (same comment as for Aluminium III)
- BOD5, Biological Oxygen Demand [water, surface water]: 6.7839e-6 kg; lognormal variance with pedigree 1.08, pedigree (1,1,5,1,1)
  (same comment as for Aluminium III)
- Beryllium II [water, ground-, long-term]: 2.5343e-7 kg; lognormal variance with pedigree 1.91, pedigree (1,1,5,1,1)
  (same comment as for Aluminium III)
- Beryllium II [water, surface water]: 4.2308e-10 kg; lognormal variance with pedigree 2.37, pedigree (1,1,5,1,1)
  (same comment as for Aluminium III)
- Boron [water, ground-, long-term]: 9.8325e-6 kg; lognormal variance with pedigree 1.31, pedigree (1,1,5,1,1)
  (same comment as for Aluminium III)
- Boron [water, surface water]: 7.8351e-8 kg; lognormal variance with pedigree 1.7, pedigree (1,1,5,1,1)
  (same comment as for Aluminium III)
- COD, Chemical Oxygen Demand [water, ground-, long-term]: 0.012423 kg; lognormal variance with pedigree 0.49, pedigree (1,1,5,1,1)
  (same comment as for Aluminium III)
- COD, Chemical Oxygen Demand [water, surface water]: 2.074e-5 kg; lognormal variance with pedigree 1.08, pedigree (1,1,5,1,1)
  (same comment as for Aluminium III)
- Cadmium II [water, ground-, long-term]: 3.055e-8 kg; lognormal variance with pedigree 7.64, pedigree (1,1,5,1,1)
  (same comment as for Aluminium III)
- Cadmium II [water, surface water]: 5.1002e-11 kg; lognormal variance with pedigree 2.66, pedigree (1,1,5,1,1)
  (same comment as for Aluminium III)
- Calcium II [water, ground-, long-term]: 0.0020282 kg; lognormal variance with pedigree 1.76, pedigree (1,1,5,1,1)
  (same comment as for Aluminium III)
- Calcium II [water, surface water]: 3.3859e-6 kg; lognormal variance with pedigree 1.21, pedigree (1,1,5,1,1)
  (same comment as for Aluminium III)
- Chromium VI [water, ground-, long-term]: 0.0001426 kg; lognormal variance with pedigree 0.74, pedigree (1,1,5,1,1)
  (same comment as for Aluminium III)
- Chromium VI [water, surface water]: 4.5143e-5 kg; lognormal variance with pedigree 0.9, pedigree (1,1,5,1,1)
  (same comment as for Aluminium III)
- Cobalt II [water, ground-, long-term]: 3.7612e-6 kg; lognormal variance with pedigree 1.98, pedigree (1,1,5,1,1)
  (same comment as for Aluminium III)
- Cobalt II [water, surface water]: 6.2791e-9 kg; lognormal variance with pedigree 2.02, pedigree (1,1,5,1,1)
  (same comment as for Aluminium III)
- Copper ion [water, ground-, long-term]: 1.4144e-6 kg; lognormal variance with pedigree 3.79, pedigree (1,1,5,1,1)
  (same comment as for Aluminium III)
- Copper ion [water, surface water]: 2.3612e-9 kg; lognormal variance with pedigree 2.15, pedigree (1,1,5,1,1)
  (same comment as for Aluminium III)
- DOC, Dissolved Organic Carbon [water, ground-, long-term]: 0.0049158 kg; lognormal variance with pedigree 0.49, pedigree (1,1,5,1,1)
  (same comment as for Aluminium III)
- DOC, Dissolved Organic Carbon [water, surface water]: 8.2068e-6 kg; lognormal variance with pedigree 1.08, pedigree (1,1,5,1,1)
  (same comment as for Aluminium III)
- Fluoride [water, ground-, long-term]: 0.0010688 kg; lognormal variance with pedigree 0.68, pedigree (1,1,5,1,1)
  (same comment as for Aluminium III)
- Fluoride [water, surface water]: 6.1237e-5 kg; lognormal variance with pedigree 0.86, pedigree (1,1,5,1,1)
  (same comment as for Aluminium III)
- Iron ion [water, ground-, long-term]: 0.0014856 kg; lognormal variance with pedigree 7.09, pedigree (1,1,5,1,1)
  (same comment as for Aluminium III)
- Iron ion [water, surface water]: 2.4802e-6 kg; lognormal variance with pedigree 1.36, pedigree (1,1,5,1,1)
  (same comment as for Aluminium III)
- Lead II [water, ground-, long-term]: 7.3357e-8 kg; lognormal variance with pedigree 8.18, pedigree (1,1,5,1,1)
  (same comment as for Aluminium III)
- Lead II [water, surface water]: 1.2247e-10 kg; lognormal variance with pedigree 2.54, pedigree (1,1,5,1,1)
  (same comment as for Aluminium III)
- Manganese II [water, ground-, long-term]: 3.0011e-6 kg; lognormal variance with pedigree 6.58, pedigree (1,1,5,1,1)
  (same comment as for Aluminium III)
- Manganese II [water, surface water]: 5.0102e-9 kg; lognormal variance with pedigree 2.05, pedigree (1,1,5,1,1)
  (same comment as for Aluminium III)
- Mercury II [water, ground-, long-term]: 1.18e-9 kg; lognormal variance with pedigree 4.29, pedigree (1,1,5,1,1)
  (same comment as for Aluminium III)
- Mercury II [water, surface water]: 1.97e-12 kg; lognormal variance with pedigree 2.95, pedigree (1,1,5,1,1)
  (same comment as for Aluminium III)
- Nickel II [water, ground-, long-term]: 1.955e-6 kg; lognormal variance with pedigree 1.65, pedigree (1,1,5,1,1)
  (same comment as for Aluminium III)
- Nickel II [water, surface water]: 3.2638e-9 kg; lognormal variance with pedigree 2.11, pedigree (1,1,5,1,1)
  (same comment as for Aluminium III)
- Phosphate [water, ground-, long-term]: 0.0010104 kg; lognormal variance with pedigree 1.21, pedigree (1,1,5,1,1)
  (same comment as for Aluminium III)
- Phosphate [water, surface water]: 1.6868e-6 kg; lognormal variance with pedigree 1.43, pedigree (1,1,5,1,1)
  (same comment as for Aluminium III)
- Selenium IV [water, ground-, long-term]: 3.2367e-6 kg; lognormal variance with pedigree 1.4, pedigree (1,1,5,1,1)
  (same comment as for Aluminium III)
- Selenium IV [water, surface water]: 1.7633e-6 kg; lognormal variance with pedigree 1.43, pedigree (1,1,5,1,1)
  (same comment as for Aluminium III)
- Silicon [water, ground-, long-term]: 0.10424 kg; lognormal variance with pedigree 0.16, pedigree (1,1,5,1,1)
  (same comment as for Aluminium III)
- Silicon [water, surface water]: 0.00023496 kg; lognormal variance with pedigree 0.71, pedigree (1,1,5,1,1)
  (same comment as for Aluminium III)
- Sodium I [water, ground-, long-term]: 0.037288 kg; lognormal variance with pedigree 0.22, pedigree (1,1,5,1,1)
  (same comment as for Aluminium III)
- Sodium I [water, surface water]: 0.0224 kg; lognormal variance with pedigree 0.24, pedigree (1,1,5,1,1)
  (same comment as for Aluminium III)
- Sulfate [water, ground-, long-term]: 0.0021425 kg; lognormal variance with pedigree 0.73, pedigree (1,1,5,1,1)
  (same comment as for Aluminium III)
- Sulfate [water, surface water]: 0.00025749 kg; lognormal variance with pedigree 0.84, pedigree (1,1,5,1,1)
  (same comment as for Aluminium III)
- TOC, Total Organic Carbon [water, ground-, long-term]: 0.0049158 kg; lognormal variance with pedigree 0.49, pedigree (1,1,5,1,1)
  (same comment as for Aluminium III)
- TOC, Total Organic Carbon [water, surface water]: 8.2068e-6 kg; lognormal variance with pedigree 1.08, pedigree (1,1,5,1,1)
  (same comment as for Aluminium III)
- Titanium ion [water, ground-, long-term]: 0.011934 kg; lognormal variance with pedigree 0.62, pedigree (1,1,5,1,1)
  (same comment as for Aluminium III)
- Titanium ion [water, surface water]: 1.9924e-5 kg; lognormal variance with pedigree 0.99, pedigree (1,1,5,1,1)
  (same comment as for Aluminium III)
- Vanadium V [water, ground-, long-term]: 0.00041127 kg; lognormal variance with pedigree 0.8, pedigree (1,1,5,1,1)
  (same comment as for Aluminium III)
- Vanadium V [water, surface water]: 1.3132e-6 kg; lognormal variance with pedigree 1.32, pedigree (1,1,5,1,1)
  (same comment as for Aluminium III)
- Zinc II [water, ground-, long-term]: 4.4931e-7 kg; lognormal variance with pedigree 5.98, pedigree (1,1,5,1,1)
  (same comment as for Aluminium III)
- Zinc II [water, surface water]: 7.501e-10 kg; lognormal variance with pedigree 2.3, pedigree (1,1,5,1,1)
  (same comment as for Aluminium III)

## Sampling procedure
Landfill model based on observed leachate concentrations in literature. Extrapolated to 60'000 years heeding chemical characteristics. Initial waste composition from various literature sources.

## Review by Niels Jungbluth 2009-02-15
passed.
