# treatment of biowaste, open dump

Dataset: EcoSpold 2, unit process
Geography: IN
Time period: 2010-01-01 to 2022-12-31
Technology level: current
Classification: ISIC rev.4 ecoinvent: 3821:Treatment and disposal of non-hazardous waste
Synonyms: municipal waste landfill
Scenario: Business-as-Usual
System model: Allocation at the point of substitution
Generated by: Avraam Symeonidis
Database: ecoinvent
isCopyrightProtected: true

## General comment
This dataset represents the activity of waste disposal of biowaste in a open dump. Recommended use of this dataset: Open dump of biowaste. // Waste composition (wet, in ppm): upper heating value 6.956 MJ/kg; lower heating value 5.216 MJ/kg; H2O 600000; O 126030; H 21207; C 161880; S 1494.5; N 3987.3; P 1126.4; B 10.207; Cl 3987.3; Br 5.9809; F 199.36; I 0.054825; Ag n.a.; As 1.9936; Ba n.a.; Cd 0.13756; Co 4.9841; Cr 7.9746; Cu 17.943; Hg 0.069778; Mn 4.2863; Mo 0.39873; Ni 5.4028; Pb 18.501; Sb n.a.; Se 0.49817; Sn 7.9707; V 2.989; Zn 58.055; Be n.a.; Sc n.a.; Sr n.a.; Ti n.a.; Tl n.a.; W n.a.; Si 39853; Fe 598.09; Ca 21731; Al 9963.4; K 3488.9; Mg 2811; Na 1495.2; . // Share of carbon in waste that is biogenic 100%. Share of metals in waste not oxidised and bulk-recyclable (exclude very small or thin parts) Iron: 0%; Alu: 0%; Copper: 0%. Overall degradability of waste during 100 years: 27%.
Picture attribution: Illegal, unmanaged, open dump in Cameroon in January 2009, by James Emery. Creative Commons under
https://commons.wikimedia.org/wiki/File:Dumping_in_Cameroon.jpg

## Included activities start
from final waste deposition (without transports to the site)

## Included activities end
Waste-specific short-term emissions to air via landfill gas and landfill leachate. Waste-specific long-term emissions from landfill.

## Geography
Given name of landfill location is 'New Dehli'. Landfill site with mean annual temperature (MAT) of 24.65 degC, mean annual precipitation (MAP) of 1083 mm/year, and net infiltration of 649 mm/year.

Climate data

Average annual evapotranspiration near the capital of India, New Dehli.
Reference: World Evapotranspiration Web Viewer, 2017. Average annual evapotranspiration measured by NASA's Moderate Resolution Imaging Spectroradiometer (MODIS). Accessed on 30th of September at: http://www.arcgis.com/apps/OnePane/main/index.html?appid=b1a0c03f04994a36b93271b0c39e6c0f

Average temperature in India.
Reference: The World Bank, 2017, Climate Change Knowledge Portal. Historical data for temperature in India 1991-2015. Accessed on 30th of September at: http://sdwebx.worldbank.org/climateportal/index.cfm?page=downscaled_data_download&menu=historical

Average annual precipitation in India for 2014.
Reference: The World Bank, 2017, World Development Indicators, Environment, 3.2 - Agricultural inputs. Average annual precipitation for 2014. Accessed on 30th of September 2017 at: http://wdi.worldbank.org/table/3.2

## Technology
This is an inventory for an open, uncontrolled waste dump for municipal solid waste. Ultimate average landfill height is 7 meters. Operation phase duration is 15 years.Percentage of landfill gas directly emitted is 100w%. A Methane Correction Factor (MCF) for landfill air emissions of 0.7057 is employed.
Leachate of the landfill is not treated. Based on average waste composition and climate data the end of carbonate phase is estimated to be reached 1279 years after waste deposition.

## Reference product
- biowaste: -1 kg; By-product classification Waste; CPC 391: Wastes from food and tobacco industry
  main reference product of this activity (supply of disposal service).
  production volume 6.832e9 kg
    According to literature, Indian municipal solid waste generation is 109589 Mg per day. In addition, the organic fraction of it is 35%. The amount of MSW that is driven to dumps in India is circa 48.8%. The aforementioned value is derived as a weighted average value of available data in all lower middle income countries across the globe. Hence, 6832969238 kg of organic waste is driven to dumps every year. Value refers to 2012.
    Reference: Hoornweg, Daniel; Bhada-Tata, Perinaz. 2012. What a Waste : A Global Review of Solid Waste Management. Urban development series;knowledge papers no. 15. World Bank, Washington, DC. © World Bank. https://openknowledge.worldbank.org/handle/10986/17388 License: CC BY 3.0 IGO.
    Zhu, Da; Asnani, P. U.; Zurbrügg, Chris; Anapolsky, Sebastian; Mani, Shyamala. 2008. Improving Municipal Solid Waste Management in India : A Sourcebook for Policy Makers and Practitioners. WBI Development Studies. Washington, DC: World Bank. © World Bank. https://openknowledge.worldbank.org/handle/10986/6916 License: CC BY 3.0 IGO.
  property heating value, net 5.2164 MJ
    Value taken from the general comment of the treatment dataset.
  property price 0 EUR2005
    Waste products are assigned a price of zero as they are assumed to require further treatment.
  properties: aluminium content 0.024908, arsenic content 4.9841e-6, boron content 2.5519e-5, bromine content 1.4952e-5, cadmium content 3.439e-7, calcium content 0.054327, carbon allocation 0.161884 kg, carbon content 0.40471, carbon content, non-fossil 0.40471, chlorine content 0.0099682, chromium content 1.9936e-5, cobalt content 1.246e-5, copper content 4.4857e-5, dry mass 0.4 kg, fluorine content 0.00049841, heating value, gross 6.9563 MJ, hydrogen content 0.053017, iodine content 1.3706e-7, iron content 0.0014952, lead content 4.6253e-5, magnesium content 0.0070276, manganese content 1.0716e-5, mercury content 1.7444e-7, molybdenum content 9.9682e-7, nickel content 1.3507e-5, nitrogen content 0.0099682, oxygen content 0.31506, phosphorus content 0.002816, potassium content 0.0087222, selenium content 1.2454e-6, silicon content 0.099634, sodium content 0.0037381, sulfur content 0.0037363, tin content 1.9927e-5, vanadium content 7.4725e-6, water content 1.5, water in wet mass 0.6 kg, wet mass 1 kg, zinc content 0.00014514

## Inputs from nature
- Occupation, dump site [natural resource, land]: 0.0035714 m2*year; lognormal variance with pedigree 0.082256, pedigree (1,1,3,1,1)
  for landfill operation phase and spontaneous renaturation.
  Uncertainty: Uncertainty calculated from uncertainty in base parameters.

## Emissions to nature
- Aluminium III [air, non-urban air or from high stacks]: 3.3618e-8 kg; lognormal variance with pedigree 0.44451, pedigree (1,1,3,1,1)
  burden from direct release or incineration of landfill biogas; or windblown leachate evaporite in arid climates.
  Uncertainty: Uncertainty calculated from unertainty of the waste composition of this waste, uncertainty in waste decomposition and short-term leaching in landfill
- Arsenic ion [air, non-urban air or from high stacks]: 1.3554e-9 kg; lognormal variance with pedigree 0.54769, pedigree (1,1,3,1,1)
  (same comment as for Aluminium III)
- Bromine [air, non-urban air or from high stacks]: 5.7008e-8 kg; lognormal variance with pedigree 0.42848, pedigree (1,1,3,1,1)
  (same comment as for Aluminium III)
- Cadmium II [air, non-urban air or from high stacks]: 4.3569e-11 kg; lognormal variance with pedigree 0.6587, pedigree (1,1,3,1,1)
  (same comment as for Aluminium III)
- Calcium [air, non-urban air or from high stacks]: 1.9099e-7 kg; lognormal variance with pedigree 0.39049, pedigree (1,1,3,1,1)
  (same comment as for Aluminium III)
- Carbon dioxide, non-fossil [air, non-urban air or from high stacks]: 0.094164 kg; lognormal variance with pedigree 0.002, pedigree (1,1,3,1,1)
  burden from direct release or incineration of landfill biogas.
  Uncertainty: Uncertainty calculated from unertainty of the waste composition of this waste, uncertainty in waste decomposition and short-term leaching in landfill
- Chromium III [air, non-urban air or from high stacks]: 6.1357e-12 kg; lognormal variance with pedigree 0.72488, pedigree (1,1,3,1,1)
  (same comment as for Aluminium III)
- Cobalt II [air, non-urban air or from high stacks]: 1.0813e-10 kg; lognormal variance with pedigree 0.63137, pedigree (1,1,3,1,1)
  (same comment as for Aluminium III)
- Copper ion [air, non-urban air or from high stacks]: 6.778e-12 kg; lognormal variance with pedigree 0.72084, pedigree (1,1,3,1,1)
  (same comment as for Aluminium III)
- Hydrochloric acid [air, non-urban air or from high stacks]: 3.9077e-5 kg; lognormal variance with pedigree 0.21461, pedigree (1,1,3,1,1)
  (same comment as for Aluminium III)
- Hydrogen fluoride [air, non-urban air or from high stacks]: 2.1457e-5 kg; lognormal variance with pedigree 0.24914, pedigree (1,1,3,1,1)
  (same comment as for Aluminium III)
- Iodine [air, non-urban air or from high stacks]: 5.2257e-10 kg; lognormal variance with pedigree 0.575, pedigree (1,1,3,1,1)
  (same comment as for Aluminium III)
- Iron ion [air, non-urban air or from high stacks]: 5.5452e-10 kg; lognormal variance with pedigree 0.57566, pedigree (1,1,3,1,1)
  (same comment as for Aluminium III)
- Lead II [air, non-urban air or from high stacks]: 9.811e-12 kg; lognormal variance with pedigree 0.70898, pedigree (1,1,3,1,1)
  (same comment as for Aluminium III)
- Magnesium [air, non-urban air or from high stacks]: 1.1709e-7 kg; lognormal variance with pedigree 0.40098, pedigree (1,1,3,1,1)
  (same comment as for Aluminium III)
- Manganese II [air, non-urban air or from high stacks]: 3.3137e-10 kg; lognormal variance with pedigree 0.59429, pedigree (1,1,3,1,1)
  (same comment as for Aluminium III)
- Mercury II [air, non-urban air or from high stacks]: 5.1622e-10 kg; lognormal variance with pedigree 0.58261, pedigree (1,1,3,1,1)
  (same comment as for Aluminium III)
- Methane, non-fossil [air, non-urban air or from high stacks]: 0.022339 kg; lognormal variance with pedigree 0.044955, pedigree (1,1,3,1,1)
  (same comment as for Carbon dioxide, non-fossil)
- Molybdenum VI [air, non-urban air or from high stacks]: 2.8382e-12 kg; lognormal variance with pedigree 0.75011, pedigree (1,1,3,1,1)
  (same comment as for Aluminium III)
- Nickel II [air, non-urban air or from high stacks]: 2.1202e-11 kg; lognormal variance with pedigree 0.68489, pedigree (1,1,3,1,1)
  (same comment as for Aluminium III)
- Nitrogen oxides [air, non-urban air or from high stacks]: 1.4765e-6 kg; lognormal variance with pedigree 0.18319, pedigree (1,1,3,1,1)
  (same comment as for Carbon dioxide, non-fossil)
- Potassium I [air, non-urban air or from high stacks]: 1.7218e-7 kg; lognormal variance with pedigree 0.38853, pedigree (1,1,3,1,1)
  (same comment as for Aluminium III)
- Selenium IV [air, non-urban air or from high stacks]: 3.546e-12 kg; lognormal variance with pedigree 0.74297, pedigree (1,1,3,1,1)
  (same comment as for Aluminium III)
- Silicon [air, non-urban air or from high stacks]: 1.3447e-7 kg; lognormal variance with pedigree 0.40531, pedigree (1,1,3,1,1)
  (same comment as for Aluminium III)
- Sodium [air, non-urban air or from high stacks]: 3.7372e-7 kg; lognormal variance with pedigree 0.36195, pedigree (1,1,3,1,1)
  (same comment as for Aluminium III)
- Sulfur dioxide [air, non-urban air or from high stacks]: 5.2659e-5 kg; lognormal variance with pedigree 0.22799, pedigree (1,1,3,1,1)
  (same comment as for Carbon dioxide, non-fossil)
- Tin ion [air, non-urban air or from high stacks]: 3.1704e-12 kg; lognormal variance with pedigree 0.74603, pedigree (1,1,3,1,1)
  (same comment as for Aluminium III)
- Vanadium V [air, non-urban air or from high stacks]: 2.1276e-11 kg; lognormal variance with pedigree 0.68483, pedigree (1,1,3,1,1)
  (same comment as for Aluminium III)
- Zinc II [air, non-urban air or from high stacks]: 1.6501e-10 kg; lognormal variance with pedigree 0.61674, pedigree (1,1,3,1,1)
  (same comment as for Aluminium III)
- Heat, waste [soil, industrial]: 1.5254 MJ; lognormal variance with pedigree 0.023444, pedigree (1,1,3,1,1)
  burden from short-term decomposition of waste (0-100a).
  Uncertainty: Uncertainty calculated from unertainty of the waste composition of this waste, uncertainty in waste decomposition and short-term leaching in landfill
- Aluminium III [water, ground-]: 0.00013447 kg; lognormal variance with pedigree 0.17626, pedigree (1,1,3,1,1)
  burden from short-term leachate to groundwater in uncontrolled landfill in moist cimate.
  Uncertainty: Uncertainty calculated from unertainty of the waste composition of this waste, uncertainty in waste decomposition and short-term leaching in landfill
- Aluminium III [water, ground-, long-term]: 0.0098289 kg; lognormal variance with pedigree 0.093965, pedigree (1,1,3,1,1)
  Emissions from long-term leachate (>100a) directly from MSW landfill and indirectly via incineration of treatement sludge from leachate treatement.
  Uncertainty: Uncertainty calculated depending on waste input and uncertainty of long-term transfer coefficents in landfill.
- Ammonium [water, ground-]: 0.0010258 kg; lognormal variance with pedigree 0.12365, pedigree (1,1,3,1,1)
  (same comment as for Aluminium III)
- Ammonium [water, ground-, long-term]: 0.00052942 kg; lognormal variance with pedigree 0.12809, pedigree (1,1,3,1,1)
  (same comment as for Aluminium III)
- Arsenic ion [water, ground-]: 9.6683e-8 kg; lognormal variance with pedigree 0.4192, pedigree (1,1,3,1,1)
  (same comment as for Aluminium III)
- Arsenic ion [water, ground-, long-term]: 1.8956e-6 kg; lognormal variance with pedigree 0.37199, pedigree (1,1,3,1,1)
  (same comment as for Aluminium III)
- BOD5, Biological Oxygen Demand [water, ground-]: 0.00032963 kg; lognormal variance with pedigree 0.12059, pedigree (1,1,3,1,1)
  (same comment as for Aluminium III)
- BOD5, Biological Oxygen Demand [water, ground-, long-term]: 0.030599 kg; lognormal variance with pedigree 0.023261, pedigree (1,1,3,1,1)
  (same comment as for Aluminium III)
- Boron [water, ground-]: 1.0207e-5 kg; lognormal variance with pedigree 0.3183, pedigree (1,1,3,1,1)
  (same comment as for Aluminium III)
- Boron [water, ground-, long-term]: 1.0207e-14 kg; lognormal variance with pedigree 0.79875, pedigree (1,1,3,1,1)
  (same comment as for Aluminium III)
- Bromine [water, ground-]: 4.0666e-6 kg; lognormal variance with pedigree 0.33706, pedigree (1,1,3,1,1)
  (same comment as for Aluminium III)
- Bromine [water, ground-, long-term]: 1.8573e-6 kg; lognormal variance with pedigree 0.34015, pedigree (1,1,3,1,1)
  (same comment as for Aluminium III)
- COD, Chemical Oxygen Demand [water, ground-]: 0.0013924 kg; lognormal variance with pedigree 0.12059, pedigree (1,1,3,1,1)
  (same comment as for Aluminium III)
- COD, Chemical Oxygen Demand [water, ground-, long-term]: 0.12925 kg; lognormal variance with pedigree 0.023261, pedigree (1,1,3,1,1)
  (same comment as for Aluminium III)
- Cadmium II [water, ground-]: 6.5354e-9 kg; lognormal variance with pedigree 0.50569, pedigree (1,1,3,1,1)
  (same comment as for Aluminium III)
- Cadmium II [water, ground-, long-term]: 1.3098e-7 kg; lognormal variance with pedigree 0.45795, pedigree (1,1,3,1,1)
  (same comment as for Aluminium III)
- Calcium II [water, ground-]: 0.00076398 kg; lognormal variance with pedigree 0.1269, pedigree (1,1,3,1,1)
  (same comment as for Aluminium III)
- Calcium II [water, ground-, long-term]: 0.020967 kg; lognormal variance with pedigree 0.071314, pedigree (1,1,3,1,1)
  (same comment as for Aluminium III)
- Chloride [water, ground-]: 0.0027111 kg; lognormal variance with pedigree 0.12319, pedigree (1,1,3,1,1)
  (same comment as for Aluminium III)
- Chloride [water, ground-, long-term]: 0.0012382 kg; lognormal variance with pedigree 0.12628, pedigree (1,1,3,1,1)
  (same comment as for Aluminium III)
- Chromium VI [water, ground-]: 2.4543e-8 kg; lognormal variance with pedigree 0.45371, pedigree (1,1,3,1,1)
  (same comment as for Aluminium III)
- Chromium VI [water, ground-, long-term]: 1.2174e-8 kg; lognormal variance with pedigree 2.9541, pedigree (1,1,3,1,1)
  (same comment as for Aluminium III)
- Cobalt II [water, ground-]: 4.3254e-7 kg; lognormal variance with pedigree 0.37517, pedigree (1,1,3,1,1)
  (same comment as for Aluminium III)
- Cobalt II [water, ground-, long-term]: 4.5515e-6 kg; lognormal variance with pedigree 0.34207, pedigree (1,1,3,1,1)
  (same comment as for Aluminium III)
- Copper ion [water, ground-]: 2.3723e-8 kg; lognormal variance with pedigree 0.45381, pedigree (1,1,3,1,1)
  (same comment as for Aluminium III)
- Copper ion [water, ground-, long-term]: 1.7919e-5 kg; lognormal variance with pedigree 0.29962, pedigree (1,1,3,1,1)
  (same comment as for Aluminium III)
- DOC, Dissolved Organic Carbon [water, ground-]: 0.0012731 kg; lognormal variance with pedigree 0.12059, pedigree (1,1,3,1,1)
  (same comment as for Aluminium III)
- DOC, Dissolved Organic Carbon [water, ground-, long-term]: 0.11818 kg; lognormal variance with pedigree 0.023261, pedigree (1,1,3,1,1)
  (same comment as for Aluminium III)
- Fluoride [water, ground-]: 3.9545e-6 kg; lognormal variance with pedigree 0.29084, pedigree (1,1,3,1,1)
  (same comment as for Aluminium III)
- Fluoride [water, ground-, long-term]: 0.00017503 kg; lognormal variance with pedigree 0.21987, pedigree (1,1,3,1,1)
  (same comment as for Aluminium III)
- Heat, waste [water, ground-, long-term]: 5.0781 MJ; lognormal variance with pedigree 0.022398, pedigree (1,1,3,1,1)
  burden from long-term decomposition of waste (>100a).
  Uncertainty: Uncertainty calculated from unertainty of the waste composition of this waste, uncertainty in waste decomposition and short-term leaching in landfill
- Hydrogen sulfide [water, ground-]: 1.0946e-5 kg; lognormal variance with pedigree 0.18329, pedigree (1,1,3,1,1)
  (same comment as for Aluminium III)
- Hydrogen sulfide [water, ground-, long-term]: 9.5997e-5 kg; lognormal variance with pedigree 0.15364, pedigree (1,1,3,1,1)
  (same comment as for Aluminium III)
- Iodide [water, ground-]: 3.7277e-8 kg; lognormal variance with pedigree 0.48358, pedigree (1,1,3,1,1)
  (same comment as for Aluminium III)
- Iodide [water, ground-, long-term]: 1.7026e-8 kg; lognormal variance with pedigree 0.48667, pedigree (1,1,3,1,1)
  (same comment as for Aluminium III)
- Iron ion [water, ground-]: 2.2181e-6 kg; lognormal variance with pedigree 0.30465, pedigree (1,1,3,1,1)
  (same comment as for Aluminium III)
- Iron ion [water, ground-, long-term]: 0.00059588 kg; lognormal variance with pedigree 0.18324, pedigree (1,1,3,1,1)
  (same comment as for Aluminium III)
- Lead II [water, ground-]: 2.9433e-8 kg; lognormal variance with pedigree 0.44684, pedigree (1,1,3,1,1)
  (same comment as for Aluminium III)
- Lead II [water, ground-, long-term]: 1.8472e-5 kg; lognormal variance with pedigree 0.29861, pedigree (1,1,3,1,1)
  (same comment as for Aluminium III)
- Magnesium [water, ground-]: 0.00046835 kg; lognormal variance with pedigree 0.15264, pedigree (1,1,3,1,1)
  (same comment as for Aluminium III)
- Magnesium [water, ground-, long-term]: 0.0023426 kg; lognormal variance with pedigree 0.13352, pedigree (1,1,3,1,1)
  (same comment as for Aluminium III)
- Manganese II [water, ground-]: 1.3255e-6 kg; lognormal variance with pedigree 0.35607, pedigree (1,1,3,1,1)
  (same comment as for Aluminium III)
- Manganese II [water, ground-, long-term]: 2.9605e-6 kg; lognormal variance with pedigree 0.34799, pedigree (1,1,3,1,1)
  (same comment as for Aluminium III)
- Mercury II [water, ground-]: 1.2905e-9 kg; lognormal variance with pedigree 0.55571, pedigree (1,1,3,1,1)
  (same comment as for Aluminium III)
- Mercury II [water, ground-, long-term]: 6.7971e-8 kg; lognormal variance with pedigree 0.48247, pedigree (1,1,3,1,1)
  (same comment as for Aluminium III)
- Molybdenum VI [water, ground-]: 1.1353e-8 kg; lognormal variance with pedigree 0.48525, pedigree (1,1,3,1,1)
  (same comment as for Aluminium III)
- Molybdenum VI [water, ground-, long-term]: 6.0463e-8 kg; lognormal variance with pedigree 0.64386, pedigree (1,1,3,1,1)
  (same comment as for Aluminium III)
- Nickel II [water, ground-]: 8.4808e-8 kg; lognormal variance with pedigree 0.41721, pedigree (1,1,3,1,1)
  (same comment as for Aluminium III)
- Nickel II [water, ground-, long-term]: 5.318e-6 kg; lognormal variance with pedigree 0.33928, pedigree (1,1,3,1,1)
  (same comment as for Aluminium III)
- Nitrate [water, ground-]: 0.00010788 kg; lognormal variance with pedigree 0.12365, pedigree (1,1,3,1,1)
  (same comment as for Aluminium III)
- Nitrate [water, ground-, long-term]: 5.5677e-5 kg; lognormal variance with pedigree 0.12809, pedigree (1,1,3,1,1)
  (same comment as for Aluminium III)
- Nitrite [water, ground-]: 5.5831e-5 kg; lognormal variance with pedigree 0.12365, pedigree (1,1,3,1,1)
  (same comment as for Aluminium III)
- Nitrite [water, ground-, long-term]: 2.8815e-5 kg; lognormal variance with pedigree 0.12809, pedigree (1,1,3,1,1)
  (same comment as for Aluminium III)
- Nitrogen, organic bound [water, ground-]: 0.0016766 kg; lognormal variance with pedigree 0.12365, pedigree (1,1,3,1,1)
  (same comment as for Aluminium III)
- Nitrogen, organic bound [water, ground-, long-term]: 0.0008653 kg; lognormal variance with pedigree 0.12809, pedigree (1,1,3,1,1)
  (same comment as for Aluminium III)
- Phosphate [water, ground-]: 5.2115e-5 kg; lognormal variance with pedigree 0.24158, pedigree (1,1,3,1,1)
  (same comment as for Aluminium III)
- Phosphate [water, ground-, long-term]: 0.00022885 kg; lognormal variance with pedigree 0.62109, pedigree (1,1,3,1,1)
  (same comment as for Aluminium III)
- Potassium I [water, ground-]: 0.00068872 kg; lognormal variance with pedigree 0.14268, pedigree (1,1,3,1,1)
  (same comment as for Aluminium III)
- Potassium I [water, ground-, long-term]: 0.0028 kg; lognormal variance with pedigree 0.12682, pedigree (1,1,3,1,1)
  (same comment as for Aluminium III)
- Selenium IV [water, ground-]: 1.4184e-8 kg; lognormal variance with pedigree 0.47811, pedigree (1,1,3,1,1)
  (same comment as for Aluminium III)
- Selenium IV [water, ground-, long-term]: 5.1194e-8 kg; lognormal variance with pedigree 0.73738, pedigree (1,1,3,1,1)
  (same comment as for Aluminium III)
- Silicon [water, ground-]: 0.00053789 kg; lognormal variance with pedigree 0.13707, pedigree (1,1,3,1,1)
  (same comment as for Aluminium III)
- Silicon [water, ground-, long-term]: 0.00028186 kg; lognormal variance with pedigree 1.5845, pedigree (1,1,3,1,1)
  (same comment as for Aluminium III)
- Sodium I [water, ground-]: 0.0014949 kg; lognormal variance with pedigree 0.15334, pedigree (1,1,3,1,1)
  (same comment as for Aluminium III)
- Sodium I [water, ground-, long-term]: 1.4952e-12 kg; lognormal variance with pedigree 0.63379, pedigree (1,1,3,1,1)
  (same comment as for Aluminium III)
- Sulfate [water, ground-]: 0.0004199 kg; lognormal variance with pedigree 0.18329, pedigree (1,1,3,1,1)
  (same comment as for Aluminium III)
- Sulfate [water, ground-, long-term]: 0.0036827 kg; lognormal variance with pedigree 0.15364, pedigree (1,1,3,1,1)
  (same comment as for Aluminium III)
- TOC, Total Organic Carbon [water, ground-]: 0.0012731 kg; lognormal variance with pedigree 0.12059, pedigree (1,1,3,1,1)
  (same comment as for Aluminium III)
- TOC, Total Organic Carbon [water, ground-, long-term]: 0.11818 kg; lognormal variance with pedigree 0.023261, pedigree (1,1,3,1,1)
  (same comment as for Aluminium III)
- Tin ion [water, ground-]: 1.2681e-8 kg; lognormal variance with pedigree 0.4747, pedigree (1,1,3,1,1)
  (same comment as for Aluminium III)
- Tin ion [water, ground-, long-term]: 7.958e-6 kg; lognormal variance with pedigree 0.32646, pedigree (1,1,3,1,1)
  (same comment as for Aluminium III)
- Vanadium V [water, ground-]: 8.5105e-8 kg; lognormal variance with pedigree 0.41997, pedigree (1,1,3,1,1)
  (same comment as for Aluminium III)
- Vanadium V [water, ground-, long-term]: 3.1856e-7 kg; lognormal variance with pedigree 0.66902, pedigree (1,1,3,1,1)
  (same comment as for Aluminium III)
- Zinc II [water, ground-]: 7.4256e-7 kg; lognormal variance with pedigree 0.34448, pedigree (1,1,3,1,1)
  (same comment as for Aluminium III)
- Zinc II [water, ground-, long-term]: 5.7312e-5 kg; lognormal variance with pedigree 0.26061, pedigree (1,1,3,1,1)
  (same comment as for Aluminium III)

## Sampling procedure
The waste composition was derived from literature. All information are found in the general comment. The UPR-LCI is created with a model for waste-specific and climate-specific life cycle inventories of open dumps and unsanitary landfilling of waste.

Reference for the model:
Doka G. (2017) A model for waste-specific and climate-specific life cycle inventories of open dumps and
unsanitary landfilling of waste. Doka Life Cycle Assessments, Zurich, Switzerland. Available at
http://www.doka.ch/publications.htm

## Review by Gabor Doka 2018-02-15
passed
