# treatment of green liquor dregs, residual material landfill

Dataset: EcoSpold 2, unit process
Geography: RoW
Time period: 1994-01-01 to 2022-12-31
Technology level: current
Classification: EcoSpold01Categories: waste management/residual material landfill
Classification: ISIC rev.4 ecoinvent: 3822:Treatment and disposal of hazardous waste
Synonyms: Bodensatz Gruenlauge der Zellstoffproduktion; green liquor dregs from pulp production
Tags: Treatment; ConvertedDataset
Scenario: Business-as-Usual
System model: Allocation at the point of substitution
Generated by: Gabor Doka (obsolete)
Published in: Doka G. 2009
Database: ecoinvent
isCopyrightProtected: true

## General comment
Inventoried waste contains 100% Green liquor dregs from pulp production, to landfill; .
waste composition (wet, in ppm): H2O 250000; O 240000; H n.a.; C 293000; S 48000; N n.a.; P n.a.; B n.a.; Cl n.a.; Br n.a.; F n.a.; I n.a.; Ag n.a.; As n.a.; Ba n.a.; Cd n.a.; Co n.a.; Cr 730; Cu 300; Hg n.a.; Mn n.a.; Mo n.a.; Ni n.a.; Pb n.a.; Sb n.a.; Se n.a.; Sn n.a.; V n.a.; Zn 2150; Be n.a.; Sc n.a.; Sr n.a.; Ti n.a.; Tl n.a.; W n.a.; Si n.a.; Fe n.a.; Ca n.a.; Al n.a.; K n.a.; Mg n.a.; Na 165820;
Share of carbon in waste that is biogenic 100%.
Additional solidification with 0.4 kg of cement.
[This dataset was already contained in the ecoinvent database version 2. It was not individually updated during the transfer to ecoinvent version 3. Life Cycle Impact Assessment results may still have changed, as they are affected by changes in the supply chain, i.e. in other datasets. This dataset was generated following the ecoinvent quality guidelines for version 2. It may have been subject to central changes described in the ecoinvent version 3 change report (http://www.ecoinvent.org/database/ecoinvent-version-3/reports-of-changes/), and the results of the central updates were reviewed extensively. The changes added e.g. consistent water flows and other information throughout the database. The documentation of this dataset can be found in the ecoinvent reports of version 2, which are still available via the ecoinvent website. The change report linked above covers all central changes that were made during the conversion process.]

## Included activities end
Waste-specific short-term emissions to water from leachate. Long-term emissions from landfill to ground water. Expenditures for solidificalion with cement (user-specified option)

## Geography
Technology encountered in Switzerland in 2000. Landfill includes base seal and leachate collection system.

## Technology
Swiss residual material landfill for polluted, inorganic waste. With base seal and leachate collection system. Recultivation after closure.

## Time period
Waste composition as given in literature reference, theoretical data or other source. Transfer coefficients from prospective model.

## Reference product
- green liquor dregs: -1 kg; By-product classification Waste; CPC 39: Wastes or scraps
  EcoSpold01Location=CH
  production volume 3.96633 kg
    This is a placeholder value that does not reflect real-world production volumes. This dataset does not currently require a real-world production volume to work in the database framework, and no actual data were collected yet. This has no negative effect on the results of the ecoinvent database.
  property carbon content, non-fossil 0.390667
    Tab 6.25, ecoinvent v2.2 report 11_III & Tab A.9, ecoinvent v2.2 report 13_I
  property price 0 EUR2005
    Waste products are assigned a price of zero as they are assumed to require further treatment.
  properties: carbon allocation 0.293 kg, carbon content 0.390667, carbon content, fossil 0, dry mass 0.75 kg, heating value, net 0 MJ, water content 0.333333, water in wet mass 0.25 kg, wet mass 1 kg

## Inputs from technosphere
- cement, unspecified: 0.330006, 0.00123816, 0.000809877, 0.0327695, 0.00862865, 0.0010286, 0.000407486, 0.00525832, 0.0198533 kg (9 suppliers, which the file names only by identifier); sum of these 0.4 kg; lognormal variance with pedigree 0.052, pedigree (1,1,5,5,1)
  EcoSpold01Location=CH
  Cement for solidification of residual material waste. Uncertainty in mass from solidification recipe.
  properties: dry mass 1 kg, wet mass 1 kg
- process-specific burdens, residual material landfill: 0.282874, 0.717126 kg (2 suppliers, which the file names only by identifier); sum of these 1 kg; lognormal variance with pedigree 0.042, pedigree (1,1,5,5,1)
  EcoSpold01Location=CH
  demands per kilogram waste. uncertainty is heeded in the module
- residual material landfill: 2.0833e-9 unit; lognormal variance with pedigree 0.042, pedigree (1,1,5,5,1)
  demands per kilogram waste. uncertainty is heeded in the module
  EcoSpold01Location=CH
- waste cement, hydrated: -0.282874, -0.717126 kg (2 suppliers, which the file names only by identifier); sum of these -1 kg; lognormal variance with pedigree 0.012, pedigree (1,1,1,5,1)
  EcoSpold01Location=CH
  Hydrated cement for solidification of residual material waste. Uncertainty in mass from solidification recipe.
  production volume
    Calculated from the production volume of green liquor dregs, 25% water in proportion to the respective output amounts.
  properties: dry mass 1 kg, wet mass 1 kg

## Emissions to nature
- BOD5, Biological Oxygen Demand [water, ground-, long-term]: 0.15652 kg; lognormal variance with pedigree 0.132, pedigree (1,1,5,5,1)
  uncertainty is calculated from uncertainties in waste composition and transfer coefficients in incinerator and landfills.
- BOD5, Biological Oxygen Demand [water, surface water]: 0.00026131 kg; lognormal variance with pedigree 0.722, pedigree (1,1,5,5,1)
  uncertainty is calculated from uncertainties in waste composition and transfer coefficients in residual landfill
- COD, Chemical Oxygen Demand [water, ground-, long-term]: 0.47852 kg; lognormal variance with pedigree 0.132, pedigree (1,1,5,5,1)
  (same comment as for BOD5, Biological Oxygen Demand)
- COD, Chemical Oxygen Demand [water, surface water]: 0.00079887 kg; lognormal variance with pedigree 0.722, pedigree (1,1,5,5,1)
  (same comment as for BOD5, Biological Oxygen Demand)
- Chromium VI [water, ground-, long-term]: 0.00013862 kg; lognormal variance with pedigree 0.742, pedigree (1,1,5,5,1)
  (same comment as for BOD5, Biological Oxygen Demand)
- Chromium VI [water, surface water]: 4.3882e-5 kg; lognormal variance with pedigree 0.912, pedigree (1,1,5,5,1)
  (same comment as for BOD5, Biological Oxygen Demand)
- Copper ion [water, ground-, long-term]: 1.1548e-5 kg; lognormal variance with pedigree 3.512, pedigree (1,1,5,5,1)
  (same comment as for BOD5, Biological Oxygen Demand)
- Copper ion [water, surface water]: 1.9279e-8 kg; lognormal variance with pedigree 1.872, pedigree (1,1,5,5,1)
  (same comment as for BOD5, Biological Oxygen Demand)
- DOC, Dissolved Organic Carbon [water, ground-, long-term]: 0.18935 kg; lognormal variance with pedigree 0.132, pedigree (1,1,5,5,1)
  (same comment as for BOD5, Biological Oxygen Demand)
- DOC, Dissolved Organic Carbon [water, surface water]: 0.00031611 kg; lognormal variance with pedigree 0.722, pedigree (1,1,5,5,1)
  (same comment as for BOD5, Biological Oxygen Demand)
- Sodium I [water, ground-, long-term]: 0.10359 kg; lognormal variance with pedigree 0.122, pedigree (1,1,5,5,1)
  (same comment as for BOD5, Biological Oxygen Demand)
- Sodium I [water, surface water]: 0.062229 kg; lognormal variance with pedigree 0.152, pedigree (1,1,5,5,1)
  (same comment as for BOD5, Biological Oxygen Demand)
- Sulfate [water, ground-, long-term]: 0.12855 kg; lognormal variance with pedigree 0.232, pedigree (1,1,5,5,1)
  (same comment as for BOD5, Biological Oxygen Demand)
- Sulfate [water, surface water]: 0.01545 kg; lognormal variance with pedigree 0.352, pedigree (1,1,5,5,1)
  (same comment as for BOD5, Biological Oxygen Demand)
- TOC, Total Organic Carbon [water, ground-, long-term]: 0.18935 kg; lognormal variance with pedigree 0.132, pedigree (1,1,5,5,1)
  (same comment as for BOD5, Biological Oxygen Demand)
- TOC, Total Organic Carbon [water, surface water]: 0.00031611 kg; lognormal variance with pedigree 0.722, pedigree (1,1,5,5,1)
  (same comment as for BOD5, Biological Oxygen Demand)
- Zinc II [water, ground-, long-term]: 2.635e-5 kg; lognormal variance with pedigree 5.442, pedigree (1,1,5,5,1)
  (same comment as for BOD5, Biological Oxygen Demand)
- Zinc II [water, surface water]: 4.3991e-8 kg; lognormal variance with pedigree 1.762, pedigree (1,1,5,5,1)
  (same comment as for BOD5, Biological Oxygen Demand)

## Sampling procedure
Landfill model based on observed leachate concentrations in literature. Extrapolated to 60'000 years heeding chemical characteristics. Initial waste composition from various literature sources.

## Extrapolations
This dataset has been copied from an original dataset covering the geography CH. The uncertainty has been adjusted accordingly.

## Review by Niels Jungbluth 2009-02-15
passed.
