# bark chips production, hardwood, at sawmill

Dataset: EcoSpold 2, unit process
Geography: RoW
Time period: 2011-01-01 to 2022-12-31
Technology level: current
Classification: ISIC rev.4 ecoinvent: 1610:Sawmilling and planing of wood
Scenario: Business-as-Usual
System model: Allocation at the point of substitution
Generated by: Frank Werner
Database: ecoinvent
isCopyrightProtected: true

## General comment
This dataset represents the service of the handling of bark from hardwood at sawmill with an output of one kg of bark, measured in oven-dry mass of bark.
The process chain in a sawmill is a net of interlinked processes; the process structure depends on the individual design and technologies in place for each sawmill. The structuring of the sawmilling processes is based on the identification of the core processes in a sawmill that are attributable to several co-products (such as upstream processes like forestry and transport of logs to the sawmill) sorting, storing and the sawing of the (debarked) log. Other processes are attributable directly to one of the co-products such as the chipping of residual wood (either after sawing or as part of the profile chipping), the chipping of the bark (the "debarking") or the suction of saw dust as collection and internal transport.
The following figure illustrates the general structure of the sawmilling processes before eventual drying and planing:

The data was provided by and approved by the Swiss forest industry (Holzindustrie Schweiz HIS).

## Included activities start
Bark chips production starts with the bark taken off the stem as part of the over-all sawing process (see respective dataset) and includes all the handling of the bark in the sawmill.

## Included activities end
This activity ends with the bark chips stored in a silo at the saw mill. The dataset does not include dust emissions due to a high water content in the wood.

## Geography
Extrapolated from average Swiss conditions.

## Reference product
- bark chips, wet, measured as dry mass: 1 kg; name barkchip_wet; By-product classification allocatable product; CPC 31230: Wood in chips or particles; lognormal variance with pedigree 0.2526, pedigree (2,1,1,5,1)
  bark chips stored in the silo resulting from the treatment of the reference product
  production volume 2.60605e10 kg
    Calculated from production volume of sawnwood x conversion efficiency of sawmilling process (to estimate log input under bark), extrapolated to log over bark via (1-bark ratio) and estimation of bark via bark ratio (of log over bark, multiplied with average basic bark density for Swiss conditions, extrapolated to GLO values via the ratio of sawnwood (NC) production according to FAOStat
  property heating value, net 4.81 MJ
    LHV is calculated based on the Carbon content of the product. More details can be found on the respective documentation.
  property price 0.034 EUR2005
    Expert judgement (Urs Luginbühl, Swiss Sawmilling industry, personal communication in June 2014). Cross-reference; FAOSTAT database; http://faostat.fao.org/site/626/DesktopDefault.aspx?PageID=626#ancor; Average import/export prices of EU for 'chips and particles'. Price: 48.76 Euro/m3. The density of the wood chips is 650 kg/m3. The price is calculated to be 0.075 EUR/kg.
  properties: carbon allocation 0.494 kg, carbon content 0.494, carbon content, fossil 0, carbon content, non-fossil 0.494, dry mass 1 kg, water content 1.4, water in wet mass 1.4 kg, wet mass 2.4 kg

## Inputs from technosphere
- EDTA, ethylenediaminetetraacetic acid: 7.41143e-8 kg
- alkylketene dimer sizing agent, for paper production: 9.62271e-8, 2.01176e-7 kg (2 suppliers, which the file names only by identifier); sum of these 2.97403e-7 kg
- aluminium sulfate, powder: 4.29011e-7, 2.05206e-7 kg (2 suppliers, which the file names only by identifier); sum of these 6.34217e-7 kg
- ammonium bicarbonate: 1.26082e-7, 6.03078e-8 kg (2 suppliers, which the file names only by identifier); sum of these 1.8639e-7 kg
- ash from paper production sludge: -3.18085e-7, -3.87572e-9, -1.48271e-7 kg (3 suppliers, which the file names only by identifier); sum of these -4.70232e-7 kg
- bark: -1.03602e-6, -0.0116292 kg (2 suppliers, which the file names only by identifier); sum of these -0.0116303 kg
- carbon dioxide, liquid: 2.10097e-7, 1.00494e-7 kg (2 suppliers, which the file names only by identifier); sum of these 3.10591e-7 kg
- diesel, burned in building machine: 0.00396956 MJ
- electricity, medium voltage: 3.14029e-5, 1.84825e-5, 0.000179166, 0.000491683, 5.33555e-6, 2.72242e-5, 4.11494e-5, 0.00164386, 7.39184e-6, 8.99167e-5 kWh (10 suppliers, which the file names only by identifier); sum of these 0.00253561 kWh
- heavy fuel oil: 1.06392e-6, 8.95246e-9, 4.55126e-8, 5.90141e-8, 1.14847e-8, 1.5374e-8, 5.76026e-7 kg (7 suppliers, which the file names only by identifier); sum of these 1.78029e-6 kg
- hydrochloric acid, without water, in 30% solution state: 4.04093e-8, 8.44812e-8 kg (2 suppliers, which the file names only by identifier); sum of these 1.2489e-7 kg
- hydrogen peroxide, without water, in 50% solution state: 5.47069e-7, 2.61675e-7 kg (2 suppliers, which the file names only by identifier); sum of these 8.08744e-7 kg
- kaolin: 3.66959e-6 kg
- latex: 1.35262e-6, 6.46988e-7 kg (2 suppliers, which the file names only by identifier); sum of these 1.99961e-6 kg
- light fuel oil: 2.27136e-7, 2.25451e-8, 2.16774e-9, 1.27295e-7, 1.61099e-9, 1.49606e-9, 1.11707e-8 kg (7 suppliers, which the file names only by identifier); sum of these 3.93422e-7 kg
- lime, packed: 7.80712e-8, 3.06642e-6, 6.574e-6 kg (3 suppliers, which the file names only by identifier); sum of these 9.7185e-6 kg
- limestone residue: -2.81028e-7, -5.87528e-7 kg (2 suppliers, which the file names only by identifier); sum of these -8.68557e-7 kg
- lubricating oil: 1.21296e-5 kg
- magnesium sulfate: 2.54089e-8 kg
- natural gas, high pressure: 1.67208e-8, 7.0579e-9, 4.04225e-8, 1.19959e-8, 6.78616e-7, 6.936e-8, 7.57121e-9, 2.23415e-10, 2.68842e-8, 2.82316e-8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 m3 (26 suppliers, which the file names only by identifier); sum of these 2.9999e-6 m3
- oxygen, liquid: 4.97904e-7, 1.04094e-6 kg (2 suppliers, which the file names only by identifier); sum of these 1.53884e-6 kg
- polyacrylamide: 5.98117e-7 kg
- potato starch: 2.47979e-6 kg
- pulpwood, hardwood, measured as solid wood under bark: 3.16682e-8, 6.62068e-8 m3 (2 suppliers, which the file names only by identifier); sum of these 9.7875e-8 m3
- pulpwood, softwood, measured as solid wood under bark: 9.23836e-9, 2.17669e-7, 9.48775e-8 m3 (3 suppliers, which the file names only by identifier); sum of these 3.21785e-7 m3
- quicklime, milled, loose: 3.2649e-6 kg
- retention aid, for paper production: 7.47883e-9, 3.57729e-9 kg (2 suppliers, which the file names only by identifier); sum of these 1.10561e-8 kg
- rosin size, for paper production: 6.64269e-8, 1.38875e-7 kg (2 suppliers, which the file names only by identifier); sum of these 2.05302e-7 kg
- sawdust, loose, wet, measured as dry mass: -0.0125596 kg
- sawlog and veneer log, eucalyptus ssp., measured as solid wood under bark: 2.29453e-9, 1.10523e-9, 1.61019e-11 m3 (3 suppliers, which the file names only by identifier); sum of these 3.41586e-9 m3
- sawlog and veneer log, hardwood, measured as solid wood under bark: 0.000190473 m3
- sawmill: 2.48259e-11 unit
- sludge from pulp and paper production: -9.0676e-7, -1.89571e-6 kg (2 suppliers, which the file names only by identifier); sum of these -2.80247e-6 kg
- sodium chlorate, powder: 5.47494e-7, 1.14461e-6 kg (2 suppliers, which the file names only by identifier); sum of these 1.69211e-6 kg
- sodium hydroxide, without water, in 50% solution state: 3.55759e-6 kg
- steatite: 7.5273e-8 kg
- sulfur: 2.54512e-7 kg
- sulfur dioxide, liquid: 2.13119e-8, 4.45555e-8 kg (2 suppliers, which the file names only by identifier); sum of these 6.58674e-8 kg
- sulfuric acid: 2.06896e-6, 9.89632e-7 kg (2 suppliers, which the file names only by identifier); sum of these 3.05859e-6 kg
- transport, freight train: 5.3033e-7 metric ton*km
- transport, freight, lorry >32 metric ton, EURO5: 1.30596e-6 metric ton*km
- transport, freight, sea, bulk carrier for dry goods: 6.56963e-6 metric ton*km
- waste mineral oil: -1.81377e-6 kg
- wastewater, unpolluted: -3.72648e-6, -7.79073e-6 m3 (2 suppliers, which the file names only by identifier); sum of these -1.15172e-5 m3
- wood chips, wet, measured as dry mass: 5.9799e-7, 7.75087e-6, 1.29947e-7, 5.73523e-5, 1.91462e-5 kg (5 suppliers, which the file names only by identifier); sum of these 8.49774e-5 kg

## Inputs from nature
- Oxygen [natural resource, in air]: 0.000192004 kg
- Water, unspecified natural origin [natural resource, fossil well]: 1.15343e-5 m3

## Emissions to nature
- Acetaldehyde [air, unspecified]: 1.09592e-11 kg
- Acetic acid [air, unspecified]: 6.09182e-11 kg
- Acetone [air, unspecified]: 1.08422e-11 kg
- Ammonia [air, unspecified]: 3.23082e-12 kg
- Arsenic ion [air, unspecified]: 9.39657e-13 kg
- Benzene [air, unspecified]: 4.70493e-11 kg
- Benzo(a)pyrene [air, unspecified]: 3.662e-15 kg
- Butane [air, unspecified]: 8.71641e-11 kg
- Cadmium II [air, unspecified]: 4.00007e-13 kg
- Calcium [air, unspecified]: 7.95094e-12 kg
- Carbon dioxide, fossil [air, unspecified]: 1.34993e-5 kg
- Carbon dioxide, non-fossil [air, unspecified]: 0.000250506 kg
- Carbon monoxide, fossil [air, unspecified]: 8.18541e-10 kg
- Chromium III [air, unspecified]: 7.8596e-14 kg
- Chromium VI [air, unspecified]: 3.61407e-15 kg
- Cobalt II [air, unspecified]: 2.38528e-12 kg
- Copper ion [air, unspecified]: 1.28605e-11 kg
- Dinitrogen monoxide [air, unspecified]: 8.49178e-9 kg
- Dioxins, measured as 2,3,7,8-tetrachlorodibenzo-p-dioxin [air, unspecified]: 4.35605e-20 kg
- Ethanol [air, unspecified]: 2.16844e-11 kg
- Formaldehyde [air, unspecified]: 5.92742e-11 kg
- Hydrocarbons, aliphatic, alkanes, unspecified [air, unspecified]: 5.13943e-11 kg
- Hydrocarbons, aliphatic, unsaturated [air, unspecified]: 2.16844e-12 kg
- Hydrocarbons, aromatic [air, unspecified]: 1.13438e-11 kg
- Hydrochloric acid [air, unspecified]: 1.05657e-10 kg
- Hydrogen fluoride [air, unspecified]: 3.61999e-12 kg
- Iron ion [air, unspecified]: 5.92708e-11 kg
- Lead II [air, unspecified]: 1.04808e-11 kg
- Mercury II [air, unspecified]: 8.80714e-15 kg
- Methane, fossil [air, unspecified]: 4.67556e-10 kg
- Methane, non-fossil [air, unspecified]: 4.01034e-8 kg
- Methanol [air, unspecified]: 3.68635e-11 kg
- Molybdenum VI [air, unspecified]: 5.78251e-13 kg
- Nickel II [air, unspecified]: 3.23941e-12 kg
- Nitrogen oxides [air, unspecified]: 2.19053e-7 kg
- PAH, polycyclic aromatic hydrocarbons [air, unspecified]: 1.22158e-12 kg
- Palladium II [air, unspecified]: 2.14189e-12 kg
- Particulate Matter, < 2.5 um [air, unspecified]: 6.50667e-9 kg
- Particulate Matter, > 10 um [air, unspecified]: 1.91683e-8 kg
- Particulate Matter, > 2.5 um and < 10um [air, unspecified]: 3.63436e-9 kg
- Pentane [air, unspecified]: 1.43907e-10 kg
- Propane [air, unspecified]: 2.59038e-11 kg
- Propionic acid [air, unspecified]: 2.33992e-12 kg
- Selenium IV [air, unspecified]: 8.67376e-13 kg
- Sodium [air, unspecified]: 5.4211e-11 kg
- Sulfur dioxide [air, unspecified]: 3.66498e-8 kg
- Toluene [air, unspecified]: 2.60692e-11 kg
- Vanadium V [air, unspecified]: 7.22813e-11 kg
- Water [air, unspecified]: 2.97088e-7 m3
- Zinc II [air, unspecified]: 1.76141e-12 kg
- BOD5, Biological Oxygen Demand [water, unspecified]: 1.30189e-7 kg
- COD, Chemical Oxygen Demand [water, unspecified]: 1.9528e-6 kg
- DOC, Dissolved Organic Carbon [water, unspecified]: 6.50944e-7 kg
- Nitrogen [water, unspecified]: 2.59688e-8 kg
- Phosphorus [water, unspecified]: 2.34561e-9 kg
- TOC, Total Organic Carbon [water, unspecified]: 6.50944e-7 kg

## Sampling procedure
complementary literature and sampling from sawmills
