# planting, tree

Dataset: EcoSpold 2, unit process
Geography: CH
Time period: 2009-01-01 to 2022-12-31
Technology level: current
Classification: ISIC rev.4 ecoinvent: 0161:Support activities for crop production
Tags: WFLDB
Scenario: Business-as-Usual
System model: Allocation at the point of substitution
Generated by: Rita Schulze
Published in: Nemecek T. 2015
Database: ecoinvent
isCopyrightProtected: true

## General comment
This dataset represents the activity of planting of 1 tree.
This dataset refers to an average situation; for specific situations exchanges might differ substantially due to site specific parameters

## Included activities start
The activity starts with machinery (tractor 30kW) and infrastructure for machinery used for planting. Assumptions: Transport from the farm to the field: 0.5 km, 20 trees per transport. The inventory was calculated with an assumed density of 2500 trees / ha.
Not included are infrastructure of the orchard such as posts or inputs such as fertiliser, plant protection or grass seeds that refer to the establishing of the orchard.

## Included activities end
The activity ends with 1 tree planted.

## Parameters
- LUC_crop_specific: 1 dimensionless
  This parameter allows to switch between a 'crop specific' and a 'country specific' approach when calculating the LUC of a crop. By default, the chosen approach is 'crop specific', so the value of the parameter is 1. If you want to apply a 'country specific' approach, turn the parameter to 0.

## Reference product
- planting tree: 1 unit; By-product classification allocatable product; CPC 86119: Other support services to crop production
  Reference flow: lanting of 1 tree
  production volume 1.14324e6 unit
    Source: FAOSTAT. Average, 2009-2012. Calculation method: fruit tree area * planting density
  property price 0.451008 EUR2005
    Calculated based on inputs: The price of the product has been calculated as a sum of the values of the material and energy inputs for this product. This value is therefore a rough estimation. It may underestimate the real price since there are additional expenses when producing any product. These expences can include for example labour costs, treatment of waste materials and profit for the producer. Please consider carefully whether this level of data quality is acceptable for your application.
  properties: carbon allocation 0 kg, carbon content 0

## Inputs from technosphere
All rows: lognormal variance with pedigree 0.0756144, pedigree (1,1,5,1,1)
- agricultural machinery, unspecified: 0.0091667 kg
  is used as proxy for the drilling machine used for planting
- agricultural trailer: 0.003125 kg
- diesel, burned in agricultural machinery: 8.24985 MJ
  Corresponds to 0.183 kg Diesel
- garage, wood, non-insulated, fire-protected: 3.4173e-6 m2
  The garage is related to the tractor which is not used for transport outside the farm.
  properties: Surface 111 m2, lifetime 50 year
- shed, large, wood, non-insulated, fire-unprotected: 3.6146e-6 m2
  This shed is used for storrage of diverse material
  properties: Surface 264 m2, lifetime 50 year
- tractor, 4-wheel, agricultural: 0.032749 kg

## Sampling procedure
The required machines and buildings were defined after the Maschinenkostenkatalog of Agroscope. The requirements in fuel were taken from the ecoinvent-database. The data refer to the situation of fruit growers in Switzerland.

## Extrapolations
If used, extrapolations are documented on the flow level.

## Review by Assumpció ANTON 2016-05-30
Be aware that the use of statistics in input calculations could provide some specific inputs not common for specific crops, this should be corrected if better information is available and better reflexed in DQR . Currently, I would dissent for some of good marks provided, being a revision of criteria applied advisable.

Pesticides will need to be amended periodically checking for update of pesticides' ban.
