# treatment of wastewater from wafer fabrication, wastewater treatment

Dataset: EcoSpold 2, unit process
Geography: CH
Time period: 2010-01-01 to 2022-12-31
Technology level: current
Classification: ISIC rev.4 ecoinvent: 3700:Sewerage
Scenario: Business-as-Usual
System model: Allocation at the point of substitution
Generated by: Nikolia Stoikou
Database: ecoinvent
isCopyrightProtected: true

## General comment
This dataset represents the treatment of a wastewater, generated from an ordinary transforming activity. Purification in wastewater treatment of 'wastewater from wafer fabrication'. Recommended use of this dataset: to be used for wastewaters, generated from ordinary transforming activities, of equal or similar composition. The wastewater has a content of TOC: 0.024363 kg/m3, COD: 0.09498 kg/m3 and BOD: 0.04594 kg/m3. TOC is equal to C present in the wastewater, COD is calculated as TOC/0.2565 and BOD is calculated as COD/0.53034. Detailed elemental composition can be found in the properties of the wastewater treated. Share of biogenic carbon in the sludge: 0%.

## Included activities start
The activity starts with the wastewater being available at the gate of the treatment facility. Collection and transportation of the wastewater to the treatment plant is not included.

## Included activities end
The activity ends with the wastewater being treated and waste-specific emissions released to the environment. Expenditures from treatment of wastewater in waste treatment plant are included as well as relevant infrastructure of the plant. Emissions from any sludge digestion, biogas generation and utilization (heeding specific wastewater composition) are also included. Waste-specific direct emissions of untreated wastewater and required territory-specific infrastructure for sewers are not contained within this dataset but instead in the regional market datasets for this wastewater.

## Geography
The site has mean annual temperature (MAT) of 9.5 degC, mean annual precipitation (MAP) of 1483.00559816076 mm/year, mean annual actual evaporation (EAT) of 528.63778611689 mm/year. In the WWT plant, 0% of its water input are lost due to evaporation from pools, 0.00131% of water is *gained* from organic mass degradation, and 0.0208% is removed off site via sludge disposal. (References: UN data, 2020. Precipitation, Environment Statistics Database, United Nations Statistics Division Available at: http://data.un.org/Data.aspx?q=precipitation&d=ENV&f=variableID%3a6; World Bank, 2022. Surface area (sq.km), World Bank Group Available at: https://data.worldbank.org/indicator/AG.SRF.TOTL.K2; MeteoSwiss, 2022. Data on Swiss temperature mean, Federal Department of Home Affairs FDHA. Federal Office of Meteorology and Climatology. Swiss Climate Available at: https://www.MeteoSwiss.admin.ch/home/climate/swiss-climate-in-detail/Swiss-temperature-mean/Data-on-the-Swiss-temperature-mean.html?query=TEMPERATURE+DATA&topic=/content/MeteoSwiss/tags/topics/klima&pageIndex=0&tab=search_tab; Doka G.,2021. A model for composition-specific life cycle inventories of regionalised wastewater fates, Zurich, Switzerland. http://www.doka.ch/publications.htm)

## Technology
This activity represents the treatment of a specific wastewater in a WWT plant (while direct emissions and sewering are heeded in the upstream market dataset for this wastewater). The size of the treatment plant infrastructure is for a national average territory situation. The assumed size of the WWTP treats 90.6 Mio m3 per year. The mixture of WWTP with one, two, or three stages is 0%-11.2%-88.8%. The actual, waste-specific oxygen requirement in the biological stages is 0.04872kg O. Generated waste-specific raw sludge is treated with anaerobic digestion. The digestion process produces 23.81 litres of biogas with an energy content of 0.4711MJ. 23.6% of the biogas is utilized for energy. The remainder is flared. The gross electric efficiency is 26.564%. The gross thermal efficiency is 47.853%. After digestion, the remaining total sludge mass (dry matter) is 0.1144kg DM.

## Reference product
- iron scrap, sorted, pressed: 1 kg; By-product classification Recyclable; CPC 39310: Slag, dross, scalings and other waste from the manufacture of iron or steel; lognormal variance with pedigree 0.3109, pedigree (1,1,1,1,1)
  scrap output from used infrastructure for wastewater treatment plant.
  Uncertainty: Uncertainty calculated from wastewater technosphere fate uncertainty and treatment infrastructure uncertainty.
  production volume 1018.64 kg
    Calculated in proportion to wastewater reference product.
  property price 0.175 EUR2005
    Temporary price data. Calculated as 90% of purchasers price based on: 2005 import and export prices (total trades (USD) divided by total weight (kg) in biggest economies of the world: EU27, USA, Brasil, China, India, Japan and Russia) from UN Commodity Trade Statistics Database (http://data.un.org/Explorer.aspxDatabase [Accessed 2011.06.20]). Commodity: Waste or scrap, of cast iron
  properties: carbon allocation 0 kg, carbon content 0, carbon content, fossil 0, carbon content, non-fossil 0, dry mass 1 kg, water content 0, water in wet mass 0 kg, wet mass 1 kg

## Inputs from technosphere
- acetone, liquid: 8.36029e-6, 2.70316e-5 kg (2 suppliers, which the file names only by identifier); sum of these 3.53919e-5 kg
- ammonia, anhydrous, liquid: 7.11369e-7, 7.45591e-8, 1.57434e-6, 7.26082e-7, 2.74018e-6, 3.66457e-7, 3.33307e-7, 7.88506e-6, 2.35551e-7 kg (9 suppliers, which the file names only by identifier); sum of these 1.46469e-5 kg
- ammonium carbonate: 0.000117531, 5.80439e-5 kg (2 suppliers, which the file names only by identifier); sum of these 0.000175575 kg
- argon, liquid: 1.88964e-5, 8.97037e-5 kg (2 suppliers, which the file names only by identifier); sum of these 0.0001086 kg
- arsine: 2.74696e-10 kg
- chemical, inorganic: 4.77385e-6 kg
- chlorine, liquid: 2.55523e-7, 5.11142e-8 kg (2 suppliers, which the file names only by identifier); sum of these 3.06638e-7 kg
- diborane: 2.74696e-10 kg
- electricity, medium voltage: 0.0969738 kWh
- heat, district or industrial, natural gas: 0.207155 MJ
- helium: 1.086e-5 kg
- hexafluoroethane: 3.19413e-6 kg
- hexamethyldisilazane: 1.40542e-6 kg
- hydrochloric acid, without water, in 30% solution state: 3.12423e-5, 0.000139899 kg (2 suppliers, which the file names only by identifier); sum of these 0.000171141 kg
- hydrogen fluoride: 4.19651e-6, 1.23115e-5 kg (2 suppliers, which the file names only by identifier); sum of these 1.6508e-5 kg
- hydrogen peroxide, without water, in 50% solution state: 7.01285e-5, 1.47728e-5 kg (2 suppliers, which the file names only by identifier); sum of these 8.49013e-5 kg
- hydrogen, liquid: 2.64639e-6, 1.21105e-5 kg (2 suppliers, which the file names only by identifier); sum of these 1.47569e-5 kg
- isopropanol: 0.000106589, 2.24533e-5 kg (2 suppliers, which the file names only by identifier); sum of these 0.000129042 kg
- methyl-3-methoxypropionate: 9.4546e-5 kg
- monoethanolamine: 9.07127e-5 kg
- nitric acid, without water, in 50% solution state: 1.15123e-6, 1.49767e-5, 1.71056e-6, 4.25384e-6, 5.53198e-6, 2.03821e-6, 7.01014e-6, 1.8481e-6, 1.70422e-6, 1.29877e-5 kg (10 suppliers, which the file names only by identifier); sum of these 5.32126e-5 kg
- nitrogen, liquid: 0.0139495, 0.00382904 kg (2 suppliers, which the file names only by identifier); sum of these 0.0177785 kg
- oxygen, liquid: 0.000161891, 0.000590007 kg (2 suppliers, which the file names only by identifier); sum of these 0.000751899 kg
- phosphane: 1.086e-9 kg
- phosphoric acid, industrial grade, without water, in 85% solution state: 0.000132404 kg
- photovoltaic cell factory: 5.12626e-12 unit
- silicone product: 1.93629e-7, 3.94081e-7 kg (2 suppliers, which the file names only by identifier); sum of these 5.87711e-7 kg
- single-Si wafer, for electronics: 6.38833e-6 m2
- sodium hydroxide, without water, in 50% solution state: 0.000527102 kg
- sulfur hexafluoride, liquid: 1.37272e-7, 2.77959e-7 kg (2 suppliers, which the file names only by identifier); sum of these 4.15231e-7 kg
- sulfuric acid: 0.000425731, 5.56946e-5 kg (2 suppliers, which the file names only by identifier); sum of these 0.000481426 kg
- tap water: 0.297604 kg
- tetrafluoroethylene: 1.91646e-6 kg
- trichloromethane: 1.96996e-7, 3.61025e-7 kg (2 suppliers, which the file names only by identifier); sum of these 5.58021e-7 kg
- trifluoromethane: 1.98037e-6 kg
- trimethylamine: 0.000184312, 9.10238e-5 kg (2 suppliers, which the file names only by identifier); sum of these 0.000275335 kg
- waste, from silicon wafer production, inorganic: -3.22543e-5 kg
- wastewater from wafer fabrication: -1.6319e-6, -0.000337457 m3 (2 suppliers, which the file names only by identifier); sum of these -0.000339089 m3
- water, ultrapure: 0.148008, 0.111294, 0.0797865 kg (3 suppliers, which the file names only by identifier); sum of these 0.339089 kg
- zeolite, slurry, without water, in 50% solution state: 1.22304e-5, 6.04007e-6 kg (2 suppliers, which the file names only by identifier); sum of these 1.82704e-5 kg

## Emissions to nature
- Arsine [air, urban air close to ground]: 1.49031e-12 kg
- Ethane, 1,1,2-trichloro-1,2,2-trifluoro-, CFC-113 [air, urban air close to ground]: 6.06789e-9 kg
- Ethane, hexafluoro-, HFC-116 [air, urban air close to ground]: 4.18182e-7 kg
- Hydrogen fluoride [air, urban air close to ground]: 1.73355e-6 kg
- Methanol [air, urban air close to ground]: 5.85743e-9 kg
- NMVOC, non-methane volatile organic compounds [air, urban air close to ground]: 1.46536e-5 kg
- Phosphine [air, urban air close to ground]: 1.10515e-10 kg
- Water [air, unspecified]: 3.88383e-5 m3
- Sulfuric acid [soil, agricultural]: 1.65773e-10 kg
- Water [water, unspecified]: 0.000258766 m3
