# treatment of fly ash and scrubber sludge, hazardous waste incineration, with energy recovery

Dataset: EcoSpold 2, unit process
Geography: RoW
Time period: 1997-01-01 to 2022-12-31
Technology level: current
Classification: ISIC rev.4 ecoinvent: 3822:Treatment and disposal of hazardous waste
Tags: ConvertedDataset; Treatment
Scenario: Business-as-Usual
System model: Allocation at the point of substitution
Share of production covered: 39 %
Generated by: Gabor Doka (obsolete)
Published in: Doka G. 2008
Database: ecoinvent
isCopyrightProtected: true

## General comment
Inventoried waste contains 100% separator sludge; . waste composition (wet, in ppm): upper heating value 0.9 MJ/kg; H2O 900000; O 197; H 2659.5; C 16745; S 98.5; N 2.7196; P 149; B 2.1; Cl 400; Br n.a.; F 0.0077703; I n.a.; Ag n.a.; As 0.5; Ba 27; Cd 0.66; Co 10.4; Cr 71.3; Cu 548.1; Hg 0.22; Mn 40.5; Mo 0.5; Ni 37.6; Pb 27.6; Sb 0.49; Se n.a.; Sn 1.7; V 0.85; Zn 270.6; Be n.a.; Sc n.a.; Sr 30; Ti n.a.; Tl n.a.; W n.a.; Si n.a.; Fe 3400; Ca 18200; Al 133.5; K 148; Mg 1670; Na 71; Share of carbon in waste that is biogenic 0%. Net energy produced in HWI: 17.11MJ/kg thermal energy and 1.27MJ/kg electric energy. Allocation of energy production: no substitution or expansion. 100% of burden allocated to waste disposal function of HWI. One kg of this waste produces 0.03149 kg of residues, which are landfilled. Additional solidification with 0.01259 kg of cement.

## Included activities end
waste-specific air and water emissions from incineration, auxiliary material consumption for flue gas cleaning. Short-term emissions to river water and long-term emissions to ground water from residual material landfill (from solidified fly ashes and scrubber slugde). Process energy demands for HWI.

## Geography
Specific to the technology encountered in Switzerland in 2000. Well applicable to modern incineration practices in Europe or North America or Japan.

## Technology
Swiss HWI plant in 2000 with wet flue gas scrubber and low-dust SCR DeNOx facility. Gross thermal efficiency 74.4% and gross electric efficiency 10%.

## Time period
Transfer coefficients for modern Swiss MSWI. Emission speciation based on early 90ies data.

## Parameters
- fraction, process water, to air: 1 dimensionless; lognormal variance with pedigree 0.092025, pedigree (4,4,3,2,4)

## Reference product
- heat, district or industrial, other than natural gas: 1 MJ; name BP2; By-product classification allocatable product; CPC 17300: Steam and hot water; lognormal variance with pedigree 0.122, pedigree (1,1,1,5,1)
  production volume 48.667 MJ
    Calculated based on the production volume of the reference product.
  property corresponding fuel use, propane, furnace >100kW 0 MJ; name fuel_use
    Lower heating value of the fuel input related to the heat/electricity output, taken directly from ecoinvent v3.0 dataset "heat production, natural gas, at industrial furnace >100kW, GLO 2000".
  property price 0.0106 EUR2005
    Average European district heat price from Ecoheatcool and Euroheat 2005-2006, Ecoheat Work package 1: The European heat market. Final report. 10.6 EUR/GJ i s the price of district heat. http://www.solarthermalworld.org/files/Ecoheatcool%20WP1%20Web.pdf?download
  properties: carbon allocation 0 kg, carbon content 0, heating value, net 1 MJ

## Inputs from technosphere
- acetylene: 4.54329e-12, 2.78079e-10 kg (2 suppliers, which the file names only by identifier); sum of these 2.82623e-10 kg
- activated carbon, granular: 1.0403e-6 kg
- aluminium casting facility: 5.09747e-15 unit
- aluminium oxide, non-metallurgical: 2.07096e-5, 0.000123341 kg (2 suppliers, which the file names only by identifier); sum of these 0.00014405 kg
- aluminium scrap, new: -1.80449e-5, -1.77924e-5 kg (2 suppliers, which the file names only by identifier); sum of these -3.58373e-5 kg
- aluminium sulfate, powder: 8.58368e-8, 2.94031e-10 kg (2 suppliers, which the file names only by identifier); sum of these 8.61308e-8 kg
- aluminium, primary, ingot: 3.01163e-5, 5.46841e-6, 2.52582e-7 kg (3 suppliers, which the file names only by identifier); sum of these 3.58373e-5 kg
- ammonia, anhydrous, liquid: 5.96514e-6, 2.98025e-7, 4.13687e-6, 4.82792e-6, 2.26145e-6, 3.19425e-6, 1.23323e-6, 1.13469e-5, 7.85606e-7 kg (9 suppliers, which the file names only by identifier); sum of these 3.40494e-5 kg
- anionic resin: 2.39828e-9, 3.5475e-12 kg (2 suppliers, which the file names only by identifier); sum of these 2.40183e-9 kg
- anode factory: 8.12903e-13 unit
- argon, liquid: 3.28907e-9, 2.01443e-7 kg (2 suppliers, which the file names only by identifier); sum of these 2.04732e-7 kg
- beryllium hydroxide: 2.92497e-6, 1.10113e-6 kg (2 suppliers, which the file names only by identifier); sum of these 4.0261e-6 kg
- bilge oil: -4.07161e-9, -4.22666e-9, -9.26031e-7 kg (3 suppliers, which the file names only by identifier); sum of these -9.34329e-7 kg
- borax, anhydrous, powder: 5.44572e-11 kg
- boric acid, anhydrous, powder: 4.39277e-10 kg
- carbon dioxide, liquid: 5.04499e-9, 3.43157e-11 kg (2 suppliers, which the file names only by identifier); sum of these 5.0793e-9 kg
- cast iron: 9.47674e-6 kg
- cationic resin: 2.39306e-9, 3.54647e-12 kg (2 suppliers, which the file names only by identifier); sum of these 2.39661e-9 kg
- cement, Portland: 1.5078e-10, 1.63353e-10, 2.23334e-10, 1.93208e-10, 1.17881e-8, 1.01336e-10, 2.40179e-10, 7.32415e-9 kg (8 suppliers, which the file names only by identifier); sum of these 2.01844e-8 kg
- cement, unspecified: 1.5322e-10, 7.92394e-12, 5.18302e-12, 1.80744e-11, 1.86437e-11, 2.60781e-12, 1.7459e-11 kg (7 suppliers, which the file names only by identifier); sum of these 2.23112e-10 kg
- chemical factory, organics: 6.75237e-16 unit
- chemical, inorganic: 1.55345e-8 kg
- chemical, organic: 2.11133e-8 kg
- chlorine, liquid: 2.15931e-8, 7.085e-11 kg (2 suppliers, which the file names only by identifier); sum of these 2.16639e-8 kg
- chlorodifluoromethane: 6.08528e-13, 2.47524e-10 kg (2 suppliers, which the file names only by identifier); sum of these 2.48133e-10 kg
- clay: 8.29555e-10, 5.44274e-6 kg (2 suppliers, which the file names only by identifier); sum of these 5.44357e-6 kg
- concrete, normal strength: 1.11343e-10, 2.12364e-11, 1.64394e-11, 2.34462e-10, 2.44504e-11, 1.03222e-8, 1.52424e-8, 2.97499e-8, 3.83941e-11 m3 (9 suppliers, which the file names only by identifier); sum of these 5.57608e-8 m3
- diesel: 4.98145e-6 kg
- diesel, burned in diesel-electric generating set, 10MW: 2.93426e-5 MJ
- electricity, high voltage: 0.0100645 kWh
- electricity, medium voltage: 2.26231e-7, 3.25363e-7, 6.79172e-8, 1.88806e-7, 4.72688e-6, 5.87494e-8, 6.51531e-8, 3.70516e-7, 1.99683e-7, 2.29397e-6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 kWh (133 suppliers, which the file names only by identifier); sum of these 0.0104045 kWh
- ethoxylated alcohol (AE7): 2.78065e-7, 1.33135e-6 kg (2 suppliers, which the file names only by identifier); sum of these 1.60942e-6 kg
- flat glass, coated: 1.04753e-9, 3.3254e-8 kg (2 suppliers, which the file names only by identifier); sum of these 3.43016e-8 kg
- fly ash and scrubber sludge: -3.20747e-7, -6.27079e-5, -1.0502e-5 kg (3 suppliers, which the file names only by identifier); sum of these -7.35307e-5 kg
- hazardous waste, for incineration: -3.96504e-5, -1.8855e-5, -4.9285e-7 kg (3 suppliers, which the file names only by identifier); sum of these -5.89982e-5 kg
- hazardous waste, for underground deposit: -9.95967e-6, -6.36717e-7 kg (2 suppliers, which the file names only by identifier); sum of these -1.05964e-5 kg
- heat, central or small-scale, natural gas: 0.0143596, 0.00566181 MJ (2 suppliers, which the file names only by identifier); sum of these 0.0200214 MJ
- heat, district or industrial, natural gas: 0.0155518, 0.00042591, 0.00379118, 0.0001498, 2.79491e-10 MJ (5 suppliers, which the file names only by identifier); sum of these 0.0199187 MJ
- heat, district or industrial, other than natural gas: 9.01364e-5, 2.80643e-6, 0.00163406, 1.09044e-5, 6.86982e-6 MJ (5 suppliers, which the file names only by identifier); sum of these 0.00174478 MJ
- heavy fuel oil: 0.00960429, 9.41831e-7, 0.000549974, 0.000145826, 1.1474e-5, 4.53874e-6, 1.6174e-6, 2.36775e-5 kg (8 suppliers, which the file names only by identifier); sum of these 0.0103423 kg
- heavy water: 4.77179e-9 kg
- helium: 4.19917e-9 kg
- hydrazine: 2.91546e-9, 1.9192e-11 kg (2 suppliers, which the file names only by identifier); sum of these 2.93465e-9 kg
- hydrogen fluoride: 2.87548e-7, 3.84828e-6 kg (2 suppliers, which the file names only by identifier); sum of these 4.13583e-6 kg
- hydrogen, liquid: 1.37749e-9, 9.0493e-8 kg (2 suppliers, which the file names only by identifier); sum of these 9.18704e-8 kg
- inert waste: -1.77739e-5, -1.53081e-7, -9.44213e-5 kg (3 suppliers, which the file names only by identifier); sum of these -0.000112348 kg
- inert waste, for final disposal: -4.04204e-6, -0.000672938 kg (2 suppliers, which the file names only by identifier); sum of these -0.00067698 kg
- isopropanol: 3.3648e-5, 7.0277e-6 kg (2 suppliers, which the file names only by identifier); sum of these 4.06757e-5 kg
- kaolin: 0.000127742 kg
- lignite ash: -6.36685e-10, -2.45155e-5 kg (2 suppliers, which the file names only by identifier); sum of these -2.45161e-5 kg
- limestone, crushed, washed: 0.000599013, 1.77827e-6 kg (2 suppliers, which the file names only by identifier); sum of these 0.000600792 kg
- low level radioactive waste: -5.87089e-11 m3
- low level radioactive waste for final repository: -3.27935e-10 m3
- lubricating oil: 2.90599e-5, 6.06614e-6 kg (2 suppliers, which the file names only by identifier); sum of these 3.5126e-5 kg
- magnesium: 2.53214e-6 kg
- magnesium factory: 9.36235e-14 unit
- methyl ethyl ketone: 8.00989e-8, 2.99329e-8 kg (2 suppliers, which the file names only by identifier); sum of these 1.10032e-7 kg
- municipal solid waste: -3.59904e-9, -4.77564e-13, -1.49304e-12, -2.25348e-13, -5.00928e-9, -1.04544e-12, -2.19464e-12, -1.25523e-13, -1.90632e-13, -9.68885e-13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 kg (39 suppliers, which the file names only by identifier); sum of these -6.72651e-6 kg
- nitric acid, without water, in 50% solution state: 1.86545e-7, 2.42681e-6, 2.77177e-7, 6.89289e-7, 8.96399e-7, 3.30271e-7, 1.13592e-6, 2.99465e-7, 2.76151e-7, 4.62652e-8 kg (10 suppliers, which the file names only by identifier); sum of these 6.56429e-6 kg
- nitrogen, liquid: 0.000275904, 7.4934e-5 kg (2 suppliers, which the file names only by identifier); sum of these 0.000350838 kg
- nuclear fuel element, for boiling water reactor, UO2 4.0% & MOX: 9.152e-12 kg
- nuclear fuel element, for pressure water reactor, UO2 4.2% & MOX: 1.51406e-8 kg
- nuclear power plant, boiling water reactor 1000MW: 1.99765e-15, 3.44808e-15 unit (2 suppliers, which the file names only by identifier); sum of these 5.44572e-15 unit
- nuclear power plant, pressure water reactor, 1000MW: 9.07212e-15, 6.0521e-15, 4.694e-15 unit (3 suppliers, which the file names only by identifier); sum of these 1.98182e-14 unit
- nuclear power plant, pressure water reactor, 650MW: 6.70118e-14 unit
- oil power plant, 500MW: 5.39551e-13 unit
- oxygen, liquid: 2.60597e-9, 1.28443e-7 kg (2 suppliers, which the file names only by identifier); sum of these 1.31049e-7 kg
- paper, woodfree, coated: 1.04632e-7, 6.21818e-10 kg (2 suppliers, which the file names only by identifier); sum of these 1.05254e-7 kg
- petroleum coke: 0.00222852 kg
- pitch: 1.13864e-7, 6.04243e-7, 6.4066e-11, 7.57164e-6, 0.000653111, 2.97843e-7, 1.2521e-5, 5.35577e-5 kg (8 suppliers, which the file names only by identifier); sum of these 0.000727777 kg
- polyethylene terephthalate, granulate, amorphous: 7.55218e-6 kg
- propane, burned in building machine: 5.63431e-5 MJ
- propylene glycol, liquid: 8.0159e-7, 3.91718e-7 kg (2 suppliers, which the file names only by identifier); sum of these 1.19331e-6 kg
- refractory, fireclay, packed: 1.13826e-5 kg
- refrigerant R134a: 3.90878e-7 kg
- reinforcing steel: 1.03084e-8 kg
- residue from cooling tower: -5.88188e-6, -1.74102e-8 kg (2 suppliers, which the file names only by identifier); sum of these -5.89929e-6 kg
- scrap steel: -5.58202e-10, -6.98271e-6, -3.23406e-8 kg (3 suppliers, which the file names only by identifier); sum of these -7.01561e-6 kg
- silica sand: 0.000165886 kg
- silicon carbide: 4.1855e-6 kg
- sodium hydroxide, without water, in 50% solution state: 1.99062e-5 kg
- sodium hypochlorite, without water, in 15% solution state: 1.35243e-9, 1.05601e-7 kg (2 suppliers, which the file names only by identifier); sum of these 1.06954e-7 kg
- sodium nitrite: 3.20917e-8, 1.56406e-8 kg (2 suppliers, which the file names only by identifier); sum of these 4.77323e-8 kg
- sodium percarbonate, powder: 8.97549e-11, 1.37484e-8 kg (2 suppliers, which the file names only by identifier); sum of these 1.38382e-8 kg
- spent nuclear fuel: -2.14029e-7 kg
- spent solvent mixture: -6.92023e-5, -6.27267e-7, -2.67737e-5 kg (3 suppliers, which the file names only by identifier); sum of these -9.66033e-5 kg
- steel, low-alloyed, hot rolled: 5.77241e-7 kg
- sulfuric acid: 1.12381e-6, 6.60208e-8 kg (2 suppliers, which the file names only by identifier); sum of these 1.18983e-6 kg
- tap water: 0.000460603, 0.00307157, 0.0001208, 0.0259995, 6.21933e-8, 0.000225406, 0.0349428, 7.92432e-5, 1.30917e-6, 0.000607227 kg (10 suppliers, which the file names only by identifier); sum of these 0.0655085 kg
- tetraethyl orthosilicate: 0.00010574 kg
- titanium dioxide: 1.1435e-6, 2.31135e-6 kg (2 suppliers, which the file names only by identifier); sum of these 3.45485e-6 kg
- transport, freight, light commercial vehicle: 9.17987e-10, 4.33755e-7, 1.90235e-10, 8.14014e-12 metric ton*km (4 suppliers, which the file names only by identifier); sum of these 4.34872e-7 metric ton*km
- transport, freight, lorry, unspecified: 1.66439e-9, 1.06621e-6, 7.47392e-10, 1.17014e-10 metric ton*km (4 suppliers, which the file names only by identifier); sum of these 1.06874e-6 metric ton*km
- transport, helicopter: 2.04651e-9 hour
- transport, passenger car: 3.65413e-7, 1.32571e-9 km (2 suppliers, which the file names only by identifier); sum of these 3.66739e-7 km
- uranium hexafluoride: 1.84953e-7, 1.62332e-8, 1.61496e-9 kg (3 suppliers, which the file names only by identifier); sum of these 2.02801e-7 kg
- uranium, enriched 3.8%, in fuel element for light water reactor: 5.05001e-9 kg
- waste asphalt: -2.44792e-5, -3.35851e-8 kg (2 suppliers, which the file names only by identifier); sum of these -2.45128e-5 kg
- waste emulsion paint, separated: -6.66859e-8 kg
- waste mineral oil: -7.84313e-7, -9.91747e-5, -2.85827e-5 kg (3 suppliers, which the file names only by identifier); sum of these -0.000128542 kg
- waste paint on metal: -4.06691e-7, -3.42759e-9 kg (2 suppliers, which the file names only by identifier); sum of these -4.10118e-7 kg
- waste paper, unsorted: -3.9899e-10, -9.88256e-8, -9.83007e-10 kg (3 suppliers, which the file names only by identifier); sum of these -1.00208e-7 kg
- waste reinforced concrete: -1.56628e-7, -7.20272e-10, -0.000121762 kg (3 suppliers, which the file names only by identifier); sum of these -0.000121919 kg
- waste x-ray film: -7.55218e-6 kg
- wastewater, average: -2.84316e-7, -4.1507e-7, -4.924e-5, -1.13131e-5 m3 (4 suppliers, which the file names only by identifier); sum of these -6.12526e-5 m3
- water, completely softened: 2.05282e-5, 6.07702e-5, 0.00434635 kg (3 suppliers, which the file names only by identifier); sum of these 0.00442765 kg
- water, decarbonised: 0.0122132, 0.000102934, 7.46666e-7, 0.000179757, 1.48259e-5, 0.0216689, 0.00656766, 0.00246818, 0.00197176, 0.00046659 kg (10 suppliers, which the file names only by identifier); sum of these 0.0456546 kg
- water, deionised: 9.07598e-9, 2.52128e-6, 8.26092e-6 kg (3 suppliers, which the file names only by identifier); sum of these 1.07913e-5 kg
- wax, lost-wax casting: 5.7449e-5 kg
- zircon: 3.56856e-5 kg

## Inputs from nature
- Carnallite [natural resource, in water]: 0.00534122 kg
- Water, cooling, unspecified natural origin [natural resource, in water]: 0.00455575 m3
- Water, river [natural resource, in water]: 0.000158185 m3
- Water, salt, ocean [natural resource, in water]: 2.19721e-6 m3
- Water, unspecified natural origin [natural resource, in ground]: 3.12297e-6 m3

## Emissions to nature
- Acetaldehyde [air, urban air close to ground]: 1.10398e-7 kg
- Acetic acid [air, urban air close to ground]: 4.50757e-7 kg
- Acetone [air, urban air close to ground]: 1.10398e-7 kg
- Aerosols, radioactive, unspecified [air, non-urban air or from high stacks]: 1.15257e-8 kBq
- Ammonia [air, unspecified]: 3.19018e-6 kg
- Ammonia [air, urban air close to ground]: 4.74829e-8 kg
- Antimony-124 [air, non-urban air or from high stacks]: 1.1069e-11 kBq
- Antimony-125 [air, non-urban air or from high stacks]: 3.44785e-10 kBq
- Argon-41 [air, non-urban air or from high stacks]: 2.01624e-6 kBq
- Arsenic ion [air, urban air close to ground]: 3.06599e-9 kg
- Barium-140 [air, non-urban air or from high stacks]: 3.50953e-9 kBq
- Benzene [air, urban air close to ground]: 2.25421e-8 kg
- Benzo(a)pyrene [air, unspecified]: 4.51967e-9 kg
- Benzo(a)pyrene [air, urban air close to ground]: 6.54786e-12 kg
- Beryllium II [air, non-urban air or from high stacks]: 1.24029e-8 kg
- Beryllium II [air, urban air close to ground]: 2.43366e-11 kg
- Cadmium II [air, urban air close to ground]: 1.46789e-9 kg
- Caesium-134 [air, non-urban air or from high stacks]: 4.07016e-11 kBq
- Caesium-137 [air, non-urban air or from high stacks]: 8.12007e-10 kBq
- Calcium [air, urban air close to ground]: 1.30906e-8 kg
- Carbon dioxide, fossil [air, unspecified]: 0.000258811 kg
- Carbon dioxide, fossil [air, urban air close to ground]: 0.0327077 kg
- Carbon monoxide, fossil [air, urban air close to ground]: 5.44316e-6 kg
- Carbon-14 [air, non-urban air or from high stacks]: 0.000135231 kBq
- Cerium-141 [air, non-urban air or from high stacks]: 8.49834e-10 kBq
- Chromium III [air, urban air close to ground]: 5.30336e-9 kg
- Chromium VI [air, urban air close to ground]: 1.35848e-10 kg
- Chromium-51 [air, non-urban air or from high stacks]: 5.44572e-11 kBq
- Cobalt II [air, urban air close to ground]: 1.6273e-8 kg
- Cobalt-58 [air, non-urban air or from high stacks]: 2.79708e-10 kBq
- Cobalt-60 [air, non-urban air or from high stacks]: 1.61097e-9 kBq
- Copper ion [air, urban air close to ground]: 2.09919e-8 kg
- Dinitrogen monoxide [air, urban air close to ground]: 1.76036e-6 kg
- Dioxins, measured as 2,3,7,8-tetrachlorodibenzo-p-dioxin [air, urban air close to ground]: 4.45814e-15 kg
- Ethane, 1,1,1,2-tetrafluoro-, HFC-134a [air, unspecified]: 3.74494e-7 kg
- Ethanol [air, urban air close to ground]: 2.25421e-7 kg
- Formaldehyde [air, urban air close to ground]: 3.38081e-7 kg
- Hydrocarbons, aliphatic, alkanes, unspecified [air, urban air close to ground]: 4.50757e-7 kg
- Hydrocarbons, aliphatic, unsaturated [air, urban air close to ground]: 2.25421e-8 kg
- Hydrocarbons, aromatic [air, urban air close to ground]: 4.50757e-9 kg
- Hydrochloric acid [air, urban air close to ground]: 1.96796e-8 kg
- Hydrogen fluoride [air, unspecified]: 2.25004e-7 kg
- Hydrogen fluoride [air, urban air close to ground]: 1.31342e-8 kg
- Hydrogen-3, Tritium [air, non-urban air or from high stacks]: 0.000115698 kBq
- Iodine-131 [air, non-urban air or from high stacks]: 1.45256e-7 kBq
- Iodine-133 [air, non-urban air or from high stacks]: 2.68166e-8 kBq
- Iron ion [air, urban air close to ground]: 3.05448e-8 kg
- Krypton-85 [air, non-urban air or from high stacks]: 8.81868e-6 kBq
- Krypton-85m [air, non-urban air or from high stacks]: 0.000173128 kBq
- Krypton-87 [air, non-urban air or from high stacks]: 1.11929e-5 kBq
- Krypton-88 [air, non-urban air or from high stacks]: 1.48109e-5 kBq
- Krypton-89 [air, non-urban air or from high stacks]: 6.31252e-6 kBq
- Lanthanum-140 [air, non-urban air or from high stacks]: 2.99609e-10 kBq
- Lead II [air, urban air close to ground]: 1.52733e-8 kg
- Manganese II [air, urban air close to ground]: 5.11455e-9 kg
- Manganese-54 [air, non-urban air or from high stacks]: 2.78881e-11 kBq
- Mercury II [air, urban air close to ground]: 6.54786e-11 kg
- Methane, fossil [air, urban air close to ground]: 2.25374e-6 kg
- Methanol [air, urban air close to ground]: 2.25421e-7 kg
- Molybdenum VI [air, urban air close to ground]: 3.53051e-9 kg
- Nickel II [air, urban air close to ground]: 1.25486e-7 kg
- Niobium-95 [air, non-urban air or from high stacks]: 0.000245747 kBq
- Nitrogen [air, unspecified]: 0.000350349 kg
- Nitrogen oxides [air, non-urban air or from high stacks]: 4.70623e-9 kg
- Nitrogen oxides [air, unspecified]: 8.75175e-7 kg
- Nitrogen oxides [air, urban air close to ground]: 0.000114965 kg
- Noble gases, radioactive, unspecified [air, non-urban air or from high stacks]: 0.00381621 kBq
- PAH, polycyclic aromatic hydrocarbons [air, unspecified]: 8.24848e-8 kg
- PAH, polycyclic aromatic hydrocarbons [air, urban air close to ground]: 7.73906e-10 kg
- Particulate Matter, < 2.5 um [air, unspecified]: 1.16646e-7 kg
- Particulate Matter, < 2.5 um [air, urban air close to ground]: 3.86417e-6 kg
- Particulate Matter, > 10 um [air, unspecified]: 4.02893e-7 kg
- Particulate Matter, > 10 um [air, urban air close to ground]: 2.78929e-6 kg
- Particulate Matter, > 2.5 um and < 10um [air, non-urban air or from high stacks]: 5.99273e-8 kg
- Particulate Matter, > 2.5 um and < 10um [air, unspecified]: 3.42967e-7 kg
- Particulate Matter, > 2.5 um and < 10um [air, urban air close to ground]: 2.63633e-6 kg
- Propane [air, urban air close to ground]: 2.25421e-8 kg
- Propanol [air, urban air close to ground]: 2.56741e-5 kg
- Radioactive species, other beta emitters [air, non-urban air or from high stacks]: 1.28926e-9 kBq
- Ruthenium-103 [air, non-urban air or from high stacks]: 7.27353e-13 kBq
- Selenium IV [air, urban air close to ground]: 2.32475e-9 kg
- Silver-110 [air, non-urban air or from high stacks]: 4.61187e-11 kBq
- Sodium [air, urban air close to ground]: 1.30886e-7 kg
- Sulfur dioxide [air, unspecified]: 6.22179e-6 kg
- Sulfur dioxide [air, urban air close to ground]: 0.000189313 kg
- Vanadium V [air, urban air close to ground]: 4.53807e-7 kg
- Water [air, non-urban air or from high stacks]: 0.000316838 m3
- Water [air, unspecified]: 6.84659e-5 m3
- Water [air, urban air close to ground]: 6.75416e-6 m3
- Xenon-131m [air, non-urban air or from high stacks]: 5.87912e-5 kBq
- Xenon-133 [air, non-urban air or from high stacks]: 0.0096665 kBq
- Xenon-133m [air, non-urban air or from high stacks]: 2.01624e-6 kBq
- Xenon-135 [air, non-urban air or from high stacks]: 0.00292642 kBq
- Xenon-135m [air, non-urban air or from high stacks]: 0.000544572 kBq
- Xenon-137 [air, non-urban air or from high stacks]: 1.72793e-5 kBq
- Xenon-138 [air, non-urban air or from high stacks]: 0.0001287 kBq
- Zinc II [air, urban air close to ground]: 1.11486e-8 kg
- Zinc-65 [air, non-urban air or from high stacks]: 1.39252e-10 kBq
- Zirconium-95 [air, non-urban air or from high stacks]: 8.54644e-10 kBq
- AOX, Adsorbable Organic Halogen [water, surface water]: 5.15486e-9 kg
- Antimony-122 [water, surface water]: 1.33199e-8 kBq
- Antimony-124 [water, surface water]: 0.000220713 kBq
- Antimony-125 [water, surface water]: 6.16893e-7 kBq
- Arsenic ion [water, surface water]: 5.15005e-11 kg
- BOD5, Biological Oxygen Demand [water, surface water]: 7.57111e-7 kg
- Barium-140 [water, surface water]: 9.12017e-9 kBq
- COD, Chemical Oxygen Demand [water, surface water]: 8.2804e-7 kg
- Cadmium II [water, surface water]: 1.25314e-10 kg
- Caesium-134 [water, surface water]: 1.29466e-6 kBq
- Caesium-136 [water, surface water]: 4.14037e-9 kBq
- Caesium-137 [water, surface water]: 3.24418e-6 kBq
- Carbon-14 [water, surface water]: 2.45747e-5 kBq
- Cerium-141 [water, surface water]: 5.83431e-9 kBq
- Cerium-144 [water, surface water]: 7.10198e-9 kBq
- Chloride [water, surface water]: 1.05368e-5 kg
- Chromium III [water, surface water]: 1.31379e-9 kg
- Chromium-51 [water, surface water]: 7.61487e-7 kBq
- Cobalt II [water, surface water]: 1.03005e-10 kg
- Cobalt-57 [water, surface water]: 1.31431e-7 kBq
- Cobalt-58 [water, surface water]: 1.69449e-5 kBq
- Cobalt-60 [water, surface water]: 1.00339e-5 kBq
- Copper ion [water, surface water]: 1.08892e-9 kg
- DOC, Dissolved Organic Carbon [water, surface water]: 5.063e-8 kg
- Fluoride [water, surface water]: 8.75261e-8 kg
- Fluoride [water, unspecified]: 3.68513e-6 kg
- Hydrocarbons, unspecified [water, surface water]: 2.65906e-8 kg
- Hydrocarbons, unspecified [water, unspecified]: 3.16797e-8 kg
- Hydrogen-3, Tritium [water, surface water]: 1.15686 kBq
- Hypochlorite [water, ocean]: 1.50572e-7 kg
- Hypochlorite [water, surface water]: 1.54995e-7 kg
- Iodine-131 [water, surface water]: 4.30053e-5 kBq
- Iodine-133 [water, surface water]: 1.08969e-8 kBq
- Iron ion [water, surface water]: 5.41597e-8 kg
- Iron-59 [water, surface water]: 0.000200418 kBq
- Lanthanum-140 [water, surface water]: 1.58672e-8 kBq
- Lead II [water, surface water]: 2.15026e-9 kg
- Magnesium [water, unspecified]: 2.27636e-6 kg
- Manganese II [water, surface water]: 1.54506e-9 kg
- Manganese-54 [water, surface water]: 3.30389e-7 kBq
- Mercury II [water, surface water]: 5.40614e-11 kg
- Molybdenum-99 [water, surface water]: 3.42368e-9 kBq
- Nickel II [water, surface water]: 7.65292e-9 kg
- Niobium-95 [water, surface water]: 5.0115e-8 kBq
- Nitrogen [water, surface water]: 3.51971e-6 kg
- Oils, unspecified [water, surface water]: 2.44228e-8 kg
- Oils, unspecified [water, unspecified]: 3.96436e-8 kg
- PAH, polycyclic aromatic hydrocarbons [water, unspecified]: 6.38821e-11 kg
- Phosphorus [water, surface water]: 7.98247e-9 kg
- Radioactive species, Nuclides, unspecified [water, surface water]: 5.73486e-11 kBq
- Radioactive species, alpha emitters [water, surface water]: 5.33354e-10 kBq
- Ruthenium-103 [water, surface water]: 4.24962e-9 kBq
- Silver-110 [water, surface water]: 2.47722e-6 kBq
- Sodium-24 [water, surface water]: 1.49405e-7 kBq
- Strontium-89 [water, surface water]: 1.01831e-7 kBq
- Strontium-90 [water, surface water]: 2.45628e-8 kBq
- Sulfate [water, surface water]: 8.61288e-5 kg
- Sulfide [water, surface water]: 2.31674e-8 kg
- Sulfite [water, surface water]: 7.77338e-7 kg
- Suspended solids, unspecified [water, surface water]: 1.09812e-6 kg
- Suspended solids, unspecified [water, unspecified]: 3.20056e-7 kg
- TOC, Total Organic Carbon [water, surface water]: 4.42691e-7 kg
- Technetium-99m [water, surface water]: 1.11878e-7 kBq
- Tellurium-123m [water, surface water]: 2.3133e-8 kBq
- Tellurium-132 [water, surface water]: 1.24064e-9 kBq
- Thallium I [water, surface water]: 1.59649e-9 kg
- Tin ion [water, surface water]: 5.15005e-11 kg
- Vanadium V [water, surface water]: 1.56889e-8 kg
- Water [water, ocean]: 2.43621e-6 m3
- Water [water, surface water]: 0.00127485 m3
- Water [water, unspecified]: 0.00303309 m3
- Zinc II [water, surface water]: 2.72218e-9 kg
- Zinc-65 [water, surface water]: 1.60915e-5 kBq
- Zirconium-95 [water, surface water]: 0.000100217 kBq

## Sampling procedure
The 2 Swiss HWI plants, used as the inventory reference technology mix, have a total annual capacity of 53'000 tons of hazardous waste. This corresponds to 39% of the Swiss total installed capacity in 2000. Swiss average plants size is 20'000 t/a.

## Extrapolations
Available waste composition data. Transfer coefficients from one modern HWI completed with data from MSWI. Waste-specific auxiliary material consumption adapted from MSWI. This dataset has been copied from an original dataset covering the geography CH. The uncertainty has been adjusted accordingly.
