# treatment of sewage sludge, 97% water, WWT, WW from concrete production, landfarming

Dataset: EcoSpold 2, unit process
Geography: RoW
Time period: 2000-01-01 to 2022-12-31
Technology level: current
Classification: ISIC rev.4 ecoinvent: 3821:Treatment and disposal of non-hazardous waste
Scenario: Business-as-Usual
System model: Allocation at the point of substitution
Generated by: Nikolia Stoikou
Database: ecoinvent
isCopyrightProtected: true

## General comment
The process represents the treatment of a waste (sewage sludge) that is exclusively produced from another waste treatment. Recommended use of this dataset: to be used within the specific chain of treatments for 'wastewater from concrete production'. Share of biogenic carbon in the sludge: 0%.

## Included activities start
The activity starts with the waste being available for landfarming. Collection and transportation of the waste to this process is not included.

## Included activities end
The activity ends with the waste being treated and waste-specific emissions from the landfarming process are released to the environment (air, water and soil). The activity is considering local fate of emissions and the initial specific wastewater composition (generating the sewage sludge). Further, it includes provision of fertiliser functions for N, P, K, if present in the sludge.

## Geography
The site has mean annual temperature (MAT) of 16.743579766537 degC, mean annual precipitation (MAP) of 1250.84108527132 mm/year, mean annual actual evaporation (EAT) of 460.58904958214 mm/year. Climate will influence the local fate emissions based on the elemental composition of the sludge as well as water evaporation to air (= consumptive water use).
References: UN data, 2020. Precipitation, Environment Statistics Database, United Nations Statistics Division Available at: http://data.un.org/Data.aspx?q=precipitation&d=ENV&f=variableID%3a6;
World Bank, 2022. Surface area (sq.km), World Bank Group Available at: https://data.worldbank.org/indicator/AG.SRF.TOTL.K2;
Doka G.,2021. A model for composition-specific life cycle inventories of regionalised wastewater fates, Zurich, Switzerland. http://www.doka.ch/publications.htm

## Technology
Landfarming is the process of spreading a substrate on agricultural soil. Sewage sludge is generated in the wastewater treatment of wastewater from concrete production. Spreading of liquid sewage sludge (97w% water content) on agricultural fields with mobile vacuum tanker.

## Reference product
- organic phosphorus fertiliser, as P2O5: 1 kg; By-product classification allocatable product; CPC 34659: Fertilizers n.e.c.; lognormal variance with pedigree 0.18885, pedigree (1,1,1,1,1)
  gross fertilizer function provided from sewage sludge spreading on agricultural fields.
  Uncertainty: Uncertainty calculated from upstream wastewater technosphere fate uncertainty, wastewater composition uncertainty, and treatment model uncertainty
  production volume 3917.48 kg
    Calculated in proportion to wastewater reference product.
  property oxygen content 0.563579
    Oxygen content (on a dry matter basis) of organic phosphorus fertiliser, as P2O5 is calculated from the molecular formula of the substance (Phosphorus).
  property phosphorus content 0.436421
    Phosphorus content (on a dry matter basis) of organic phosphorus fertiliser, as P2O5 is calculated from the molecular formula of the substance (Phosphorus).
  property price 0.241 EUR2005
    Set equal to the price of the corresponding inorganic fertiliser
  properties: carbon allocation 0 kg, carbon content 0, carbon content, fossil 0, carbon content, non-fossil 0, dry mass 1 kg, water content 0, water in wet mass 0 kg, wet mass 1 kg

## Inputs from technosphere
- acetic acid, without water, in 98% solution state: 7.70099e-5 kg
- alkylbenzene sulfonate, linear, petrochemical: 0.000200758 kg
- aluminium, cast alloy: 1.01283e-5 kg
- anhydrite: 0.000112281 kg
- cement, ART: 0.000105412 kg
- cement, CEM II/A: 1.40053e-6, 0.00134574, 9.35056e-5, 6.63705e-7 kg (4 suppliers, which the file names only by identifier); sum of these 0.00144131 kg
- cement, CEM II/B: 0.000753569, 0.000197218, 0.0106574 kg (3 suppliers, which the file names only by identifier); sum of these 0.0116082 kg
- cement, CEM II/B-V: 0.000389788 kg
- cement, CEM III/A: 0.0106304, 4.44224e-6, 0.152976, 0.000171899 kg (4 suppliers, which the file names only by identifier); sum of these 0.163782 kg
- cement, CP II-E: 0.0029538 kg
- cement, CP II-F: 0.00152907 kg
- cement, CP III: 0.0232661 kg
- cement, Portland: 0.0130001, 0.000179952, 0.000271011, 0.0003005, 0.00918753, 0.00503657, 0.00177702, 0.133213, 1.98481e-5 kg (9 suppliers, which the file names only by identifier); sum of these 0.162986 kg
- cement, type ICo: 0.000497265 kg
- cement, type IP: 0.000520944 kg
- cement, type general use: 0.000362963 kg
- chemical, organic: 0.00164095 kg
- clay pit infrastructure: 1.75901e-12 unit
- concrete mixing factory: 5.63123e-10 unit
- concrete, 25-30MPa: 3.61504e-6 m3
- concrete, 25MPa: 2.63055e-7, 1.13903e-7, 4.37938e-5, 5.31937e-8, 1.80093e-6, 1.77222e-6 m3 (6 suppliers, which the file names only by identifier); sum of these 4.77971e-5 m3
- diesel, burned in building machine: 0.0128785 MJ
- electricity, medium voltage: 4.92154e-5, 6.64533e-5, 9.55724e-5, 1.995e-5, 0.00168132, 0.00116854, 0.00631063, 6.31106e-5, 3.22207e-11, 2.36328e-5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 kWh (78 suppliers, which the file names only by identifier); sum of these 0.0384387 kWh
- ethylene oxide: 0.000212051, 9.59883e-5 kg (2 suppliers, which the file names only by identifier); sum of these 0.00030804 kg
- expanded clay: 0.00342912 kg
- fatty alcohol: 1.33059e-6 kg
- gravel, crushed: 0.000168325, 0.146127, 0.497508, 0.00254952, 0.14186 kg (5 suppliers, which the file names only by identifier); sum of these 0.788212 kg
- gravel, round: 0.604875, 0.000146683 kg (2 suppliers, which the file names only by identifier); sum of these 0.605021 kg
- gypsum, mineral: 8.34205e-5 kg
- heat, central or small-scale, other than natural gas: 0.000112973, 0.00149369 MJ (2 suppliers, which the file names only by identifier); sum of these 0.00160667 MJ
- heat, district or industrial, natural gas: 0.00152896, 0.000439328, 0.00588484, 3.08238e-5 MJ (4 suppliers, which the file names only by identifier); sum of these 0.00788396 MJ
- heat, district or industrial, other than natural gas: 0.00209743, 0.00623417, 0.0277316 MJ (3 suppliers, which the file names only by identifier); sum of these 0.0360632 MJ
- lubricating oil: 0.000115165, 2.16536e-5 kg (2 suppliers, which the file names only by identifier); sum of these 0.000136818 kg
- municipal solid waste: -1.03772e-9, -5.98098e-8, -2.23745e-10, -7.33914e-7, -2.61478e-10 kg (5 suppliers, which the file names only by identifier); sum of these -7.95247e-7 kg
- packing, clay product: 0.010533 kg
- quicklime, milled, packed: 0.000599073 kg
- reinforcing steel: 0.00415451 kg
- sand: 0.0747211, 0.0125019, 0.00016487, 0.936933 kg (4 suppliers, which the file names only by identifier); sum of these 1.02432 kg
- scrap steel: -3.82546e-9, -1.16597e-5, -3.01939e-6 kg (3 suppliers, which the file names only by identifier); sum of these -1.46829e-5 kg
- steel, low-alloyed, hot rolled: 2.94938e-5 kg
- synthetic rubber: 2.54805e-5 kg
- tap water: 0.000557635, 0.105281, 0.0385744, 0.00139564, 0.213209, 0.00205626, 0.168947, 0.00267069, 0.00189347, 0.0217489 kg (10 suppliers, which the file names only by identifier); sum of these 0.556334 kg
- waste concrete: -1.46385e-5, -0.0658747, -0.00414032 kg (3 suppliers, which the file names only by identifier); sum of these -0.0700296 kg
- waste mineral oil: -1.7667e-7, -2.34717e-5, -7.13643e-6 kg (3 suppliers, which the file names only by identifier); sum of these -3.07848e-5 kg
- waste rubber, unspecified: -3.69721e-7, -8.8071e-6, -1.21222e-5 kg (3 suppliers, which the file names only by identifier); sum of these -2.1299e-5 kg
- wastewater from concrete production: -5.0063e-7, -0.00012081 m3 (2 suppliers, which the file names only by identifier); sum of these -0.000121311 m3
- wastewater, unpolluted: -6.51445e-7, -0.000144949 m3 (2 suppliers, which the file names only by identifier); sum of these -0.0001456 m3

## Inputs from nature
- Water, unspecified natural origin [natural resource, in water]: 9.70325e-5 m3

## Emissions to nature
- Carbon dioxide, fossil [air, non-urban air or from high stacks]: 4.56488e-5 kg
- Water [air, unspecified]: 5.13213e-5 m3
- Chlorides, unspecified [water, unspecified]: 1.92292e-12 kg
- Copper ion [water, unspecified]: 9.64572e-12 kg
- Iron ion [water, unspecified]: 9.64572e-12 kg
- Oils, unspecified [water, unspecified]: 1.44375e-10 kg
- Suspended solids, unspecified [water, unspecified]: 2.88749e-10 kg
- Water [water, unspecified]: 0.000118302 m3
