# ethanol production from maize

Dataset: EcoSpold 2, unit process
Geography: RoW
Time period: 1990-01-01 to 2022-12-31
Technology level: current
Classification: ISIC rev.4 ecoinvent: 2011:Manufacture of basic chemicals
Classification: EcoSpold01Categories: biomass/fuels
Tags: ConvertedDataset
Scenario: Business-as-Usual
System model: Allocation at the point of substitution
Share of production covered: 0 %
Generated by: Edgard Gnansounou
Published in: Jungbluth N. 2007
Database: ecoinvent
isCopyrightProtected: true

## General comment
Inventory refers to the production of 1 kg hydrated ethanol 95% (dry basis, i.e. 1.05 kg hydrated ethanol wet basis), respectively 1 kg of DDGS (wet basis) from corn grains. The multioutput-process 'corn, in distillery' delivers the co-products 'ethanol, 95% in H2O, from corn, at distillery' and 'DDGS, from corn, at distillery' (dry-milling technology). Economic allocation with allocation factor for common stages of 97.6% to ethanol. Allocation is done according to carbon balance for CO2 emissions.
[This dataset was already contained in the ecoinvent database version 2. It was not individually updated during the transfer to ecoinvent version 3. Life Cycle Impact Assessment results may still have changed, as they are affected by changes in the supply chain, i.e. in other datasets. This dataset was generated following the ecoinvent quality guidelines for version 2. It may have been subject to central changes described in the ecoinvent version 3 change report (http://www.ecoinvent.org/database/ecoinvent-version-3/reports-of-changes/), and the results of the central updates were reviewed extensively. The changes added e.g. consistent water flows and other information throughout the database. The documentation of this dataset can be found in the ecoinvent reports of version 2, which are still available via the ecoinvent website. The change report linked above covers all central changes that were made during the conversion process.]

## Included activities end
This dataset includes the transport of corn grains to the distillery, and the processing of corn grains to hydrated ethanol (95%) and DDGS (92% dry matter). System boundary is at the distillery. Dehydration to anhydrous ethanol is not included. The process described corresponds to the dry-milling technology.

## Geography
Data is from the etha+ project (Alcosuisse, CH), adapted to US context

## Technology
The process described corresponds to the dry-milling corn-to-ethanol technology. The production of DDGS from stillage includes separation of draff, concentration, drying and granulation. DDGS are used as animal feed.

## Time period
Data from 1990 to 2006, current dry-mill technology for the production of ethanol from corn

## Parameters
- fraction, cooling water, cooling pond system, to air: 0.032 dimensionless; name fraction_CW_CP_to_air; lognormal variance with pedigree 0.0413, pedigree (2,3,1,3,1)
  Calculated based on literature value (Scown, C.D., 2011, Water Footprint of U.S. Transportation Fuels and supplying information of the article) (Vionnet, S., Quantis Water Database - Technical Report, 2012).
- fraction, cooling water, once-through system, to air: 0.004 dimensionless; name fraction_CW_OT_to_air; lognormal variance with pedigree 0.0413, pedigree (2,3,1,3,1)
  (same comment as for fraction, cooling water, cooling pond system, to air)
- fraction, cooling water, recirculating system, to air: 0.771 dimensionless; name fraction_CW_R_to_air; lognormal variance with pedigree 0.0413, pedigree (2,3,1,3,1)
  (same comment as for fraction, cooling water, cooling pond system, to air)
- fraction, cooling water, to air: 0.64 dimensionless; lognormal variance with pedigree 0.092025, pedigree (4,4,3,2,4)
- fraction, process water, to air: 0.02 dimensionless; lognormal variance with pedigree 0.092025, pedigree (4,4,3,2,4)
- fraction, tap water, to air: 0.02 dimensionless; lognormal variance with pedigree 0.092025, pedigree (4,4,3,2,4)

## Reference product
- ethanol, without water, in 95% solution state, from fermentation: 1 kg; name RP_amount_1; By-product classification allocatable product; CPC 35491: Biodiesel; CAS 64-17-5
  EcoSpold01Location=US
  production volume 2.40879e9 kg
    0.79 kg/l; All Us production of ethanol + 76% and 70% of Chinese and Canadian production. Source: F. O. Licht World Ethanol and Biofuels Report, vol. 4, no. 17 (9 May 2006), p. 395. Shares estimated.
  property heating value, net 28.1 MJ
    Based on literature, page 275, Report 17: Jungbluth, N., Chudacoff, M., Dauriat, A., Dinkel, F., Doka, G., Faist Emmenegger, M., Gnansounou, E., Kljun, N., Schleiss, K., Spielmann, M., Stettler, C., Sutter, J. 2007: Life Cycle Inventories of Bioenergy. ecoinvent report No. 17, Swiss Centre for Life Cycle Inventories, Dübendorf, CH.
  property price 0.324 EUR2005
    Temporary price data. Calculated as 90% of purchasers price based on: 2005 prices from FAPRI2007, 2009. Agricultural outlook. (http://www.fapri.missouri.edu/outreach/publications/ag_outlook.asp?current_page=outreach; accessed 22/06/10). Unit conversion from US gallon to kg - 1 gallon = 3.7856 liter * 0.789 kg/liter (ethanol density) = 2.9868 kg
  properties: EcoSpold01Allocation_undefined_1 100, EcoSpold01Allocation_undefined_10 98.84, EcoSpold01Allocation_undefined_11 98.84, EcoSpold01Allocation_undefined_12 98.84, EcoSpold01Allocation_undefined_13 98.84, EcoSpold01Allocation_undefined_14 98.84, EcoSpold01Allocation_undefined_15 49.62, EcoSpold01Allocation_undefined_16 33.43, EcoSpold01Allocation_undefined_17 33.43, EcoSpold01Allocation_undefined_18 50.08, EcoSpold01Allocation_undefined_19 41.59, EcoSpold01Allocation_undefined_2 100, EcoSpold01Allocation_undefined_3 0, EcoSpold01Allocation_undefined_4 0, EcoSpold01Allocation_undefined_5 98.84, EcoSpold01Allocation_undefined_6 98.84, EcoSpold01Allocation_undefined_7 98.84, EcoSpold01Allocation_undefined_8 98.84, EcoSpold01Allocation_undefined_9 98.84, carbon allocation 0.521739 kg, carbon content 0.521739, carbon content, fossil 0, carbon content, non-fossil 0.521739, dry mass 1 kg, water content 0, water in wet mass 0 kg, wet mass 1 kg

## Inputs from technosphere
- Distiller's Dried Grains with Solubles: -0.487081 kg; name BP_amount_1
  production volume
    Calculated from production volume of reference product using the relative outputs.
  properties: EcoSpold01Allocation_undefined_10 1.163, EcoSpold01Allocation_undefined_11 1.163, EcoSpold01Allocation_undefined_12 1.163, EcoSpold01Allocation_undefined_13 1.163, EcoSpold01Allocation_undefined_15 50.38, EcoSpold01Allocation_undefined_16 66.57, EcoSpold01Allocation_undefined_17 66.57, EcoSpold01Allocation_undefined_18 49.92, EcoSpold01Allocation_undefined_19 58.41, EcoSpold01Allocation_undefined_20 100, EcoSpold01Allocation_undefined_3 100, EcoSpold01Allocation_undefined_4 100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
- ammonium sulfate: 0.00106746, 0.0034786 kg (2 suppliers, which the file names only by identifier); sum of these 0.00454606 kg; lognormal variance with pedigree 0.0521, pedigree (1,2,5,5,1)
  Etha+ project Alcosuisse, industrial data, cross checking with literature survey for US conditions
  EcoSpold01Location=RER
  Uncertainty: etha+ project Alcosuisse, industrial data, cross checking with literature survey for US conditions
  properties: dry mass 1 kg, wet mass 1 kg
- electricity, medium voltage: 0.0132343, 0.00488654, 0.029433, 0.000394119, 0.00201096, 0.121426, 0.00900112, 0.00664184 kWh (8 suppliers, which the file names only by identifier); sum of these 0.187028 kWh; lognormal variance with pedigree 0.0521, pedigree (1,2,5,5,1)
  EcoSpold01Location=US
  Etha+ project Alcosuisse, industrial data, cross checking with literature survey for US conditions
  Uncertainty: etha+ project Alcosuisse, industrial data, cross checking with literature survey for US conditions
- ethanol fermentation plant: 2.34662e-10 unit; lognormal variance with pedigree 0.3521, pedigree (1,2,5,5,1)
  EcoSpold01Location=CH
  Etha+ project Alcosuisse, industrial data, cross checking with literature survey for US conditions
  Uncertainty: etha+ project Alcosuisse, industrial data, cross checking with literature survey for US conditions
- heat, district or industrial, natural gas: 6.5372 MJ; lognormal variance with pedigree 0.0521, pedigree (1,2,5,5,1)
  EcoSpold01Location=RER
  Etha+ project Alcosuisse, industrial data, cross checking with literature survey for US conditions
  Uncertainty: etha+ project Alcosuisse, industrial data, cross checking with literature survey for US conditions
  properties: heating value, net 1 MJ
- inorganic nitrogen fertiliser, as N: 0.000407224, 3.83537e-5, 0.000105105, 4.65854e-6, 2.99203e-5, 1.10004e-5, 1.05225e-5, 8.77439e-6, 3.34767e-5, 1.10316e-5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 kg (29 suppliers, which the file names only by identifier); sum of these 0.00454606 kg; lognormal variance with pedigree 0.0521, pedigree (1,2,5,5,1)
  (same comment as for heat, district or industrial, natural gas)
  properties: dry mass 1 kg, wet mass 1 kg
- maize grain: 0.0898435, 0.00286913, 1.42624 kg (3 suppliers, which the file names only by identifier); sum of these 1.51895 kg; lognormal variance with pedigree 0.0521, pedigree (1,2,5,5,1)
  Etha+ project Alcosuisse, industrial data, cross checking with literature survey for US conditions
  EcoSpold01Location=US
  Uncertainty: etha+ project Alcosuisse, industrial data, cross checking with literature survey for US conditions
  properties: carbon content, non-fossil 0.46957, dry mass 0.86 kg, water content 0.162791, wet mass 1 kg
  note on carbon content, non-fossil: Composition data obtained from Corn Grain Whole, in (http://beefmagazine.com/images/2009%20feed%20table.pdf). First, composition data were refered to 1 kg dry mass. Then, C-contents were calculated considering a C-content/dry mass of 46% in carbohydrates (including fibres), 53% in proteins and 75% in fats. All data from "Evolutionary and Biochemical Aspects", A.D. Kay and T. Vrede (in Global Ecology, 2010, Elsevier B.V., S.E. Jørgensen Ed.). Finally, C-content in kg was multiplied by kg dry mass in the exchange.
- soda ash, light: 0.0169818 kg; lognormal variance with pedigree 0.0521, pedigree (1,2,5,5,1)
  (same comment as for heat, district or industrial, natural gas)
  properties: carbon content, fossil 0.0517241, dry mass 1 kg, heating value, net 3.43 MJ, wet mass 1 kg
- sulfuric acid: 0.0100116, 0.00130973 kg (2 suppliers, which the file names only by identifier); sum of these 0.0113213 kg; lognormal variance with pedigree 0.0521, pedigree (1,2,5,5,1)
  (same comment as for heat, district or industrial, natural gas)
  properties: dry mass 1 kg, wet mass 1 kg
- tap water: 1.98891 kg; name tap_water_input; lognormal variance with pedigree 0.0521, pedigree (1,2,5,5,1)
  (same comment as for heat, district or industrial, natural gas)
  properties: carbon content, fossil 0.00178991, dry mass 0.000337476 kg, water content 2962.17, wet mass 1 kg
  note on carbon content, fossil: Bicarbonate content is 2.93 mol/m3. CO2 content is 0.1 mol/m3 (ecoinvent v2.2 report 8, Tab 93.1).
- transport, tractor and trailer, agricultural: 0.015128, 6.15174e-5 metric ton*km (2 suppliers, which the file names only by identifier); sum of these 0.0151895 metric ton*km; lognormal variance with pedigree 0.1721, pedigree (1,2,5,5,1)
  Assumption, ecoinvent guidelines, standard distances
  EcoSpold01Location=CH
  Uncertainty: Assumption, ecoinvent guidelines, standard distances
- wastewater, average: -6.6883e-6, -3.96257e-6, -0.00111296, -0.000266132 m3 (4 suppliers, which the file names only by identifier); sum of these -0.00138975 m3; lognormal variance with pedigree 0.0121, pedigree (1,2,1,5,1)
  (same comment as for ethanol fermentation plant)
  production volume
    Calculated from the production volume of ethanol, without water, in 95% solution state, from fermentation in proportion to the respective output amounts.
  properties: carbon content, non-fossil 0.194039, dry mass 0.346837 kg, mass concentration, TOC 0.1091 kg/m3, mass concentration, calcium 0.039453 kg/m3, mass concentration, chlorine 0.030031 kg/m3, mass concentration, hydrogen 0.013365 kg/m3, mass concentration, nitrogen 0.031015 kg/m3, mass concentration, oxygen 0.069824 kg/m3, mass concentration, sodium 0.06456 kg/m3, mass concentration, sulfur 0.015602 kg/m3, water content 2882.2, wet mass 1000 kg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
  note on carbon content, non-fossil: 0.0673 kg TOC/m3 (Tab A.17, ecoinvent v2.2 report 13_I). TOC was considered as Total Carbon.

## Inputs from nature
- Carbon dioxide, in air [natural resource, in air]: 0.702043 kg; lognormal variance with pedigree 0.042, pedigree (1,1,5,5,1)
  Calculation, to close carbon balance
  Uncertainty: Calculation, to close carbon balance
- Water, cooling, unspecified natural origin [natural resource, in water]: 0.00205914 m3; name water_cooling_UNO_input; source Schnoor, J.L. 2008; lognormal variance with pedigree 0.0546, pedigree (3,3,5,5,1)
  Calculated based on literature, (Vionnet, S., Quantis Water Database - Technical Report, 2012).
  property carbon content, fossil 0.0104329; name C_content_fossil
  property carbon content, non-fossil 0; name C_content_non_fossil
  property dry mass 0.1101 kg; name DM
  property water content 9081.65; name water_content
  property water in wet mass 999.89 kg; name WWM

## Emissions to nature
- Carbon dioxide, non-fossil [air, urban air close to ground]: 1.1755 kg; lognormal variance with pedigree 0.042, pedigree (1,1,5,5,1)
  Calculation, to close carbon balance
  Uncertainty: Calculation, to close carbon balance
- Water [air, unspecified]: 0.00135763 m3; name water_to_air_unspecified; lognormal variance with pedigree 0.0827, pedigree (2,2,5,5,1)
  Calculated value based on literature values and expert opinion. See comments in the parametres' comment field.
  property fraction, origin: fresh water 0.0292998; name fraction_origin_fresh_water
  property fraction, origin: salt water 0; name fraction_origin_salt_water
  property fraction, origin: unspecified 0.9707; name fraction_origin_unspecified
- Water [water, unspecified]: 0.00130068 m3; name water_to_water_unspecified; = (tap_water_input/1000)*(1-fraction_TW_to_air)+water_cooling_UNO_input*(1-fraction_CW_to_air)-0.00298629153338991; lognormal variance with pedigree 0.0827, pedigree (2,2,5,5,1)
  (same comment as for Water)
  property fraction, origin: fresh water 0.72447; name fraction_origin_fresh_water_Ww
  property fraction, origin: salt water 0; name fraction_origin_salt_water_Ww
  property fraction, origin: unspecified 0.27553; name fraction_origin_unspecified_Ww

## Sampling procedure
Data is from the etha+ project (Alcosuisse, CH), technology by French ethanol plant supplier, modelling by ENERS (CH)

## Extrapolations
none This dataset has been copied from an original dataset covering the geography US. The uncertainty has been adjusted accordingly.

## Review by Niels Jungbluth 2006-08-15
Passed.
none

## Review by Emilia Moreno Ruiz 2012-03-19
name change from "Distiller's Dried Grains with Solubles, from maize" to "Distiller's Dried Grains with Solubles"
