# liquid manure spreading, by vacuum tanker

Dataset: EcoSpold 2, unit process
Geography: CH
Time period: 1991-01-01 to 2022-12-31
Technology level: current
Classification: EcoSpold01Categories: agricultural means of production/work processes
Classification: ISIC rev.4 ecoinvent: 0161:Support activities for crop production
Tags: ConvertedDataset
Scenario: Business-as-Usual
System model: Allocation at the point of substitution
Generated by: Silvio Blaser
Published in: Nemecek, T. 2007
Database: ecoinvent
isCopyrightProtected: true

## General comment
This dataset represents an example of a typical liquid manure spreading. A liquid manure spreading with vacuum tank 5000 l carrying capacity. Include pumping from liquid manure container at farm. Liquid manure and emissions from liquid manure were not included. The functional unit (FU) is one cubic meter liquid manure spreaded. The operation time is 0.06 h/FU.
This dataset represents an example of a typical liquid manure spreading. A liquid manure spreading with vacuum tank 5000 l carrying capacity. Include pumping from liquid manure container at farm. The functional unit (FU) is one cubic meter liquid manure spreaded. The operation time is 0.06 h/FU.

## Included activities start
From agricultural field foreseen to be processed.

## Included activities end
This activity ends with the delivery of liquid manure spreading. The dataset includes the diesel fuel consumption and the amount of agricultural machinery and of the shed attributed to the field work. It was also taken into consideration the amount of emissions to the air from combustion and the emission to the soil from tyre abrasion during the work process. The following activities where considered part of the work process: preliminary work at the farm, such as attaching the adequate machine to the tractor; driving to field (with an assumed distance of 1 km); field work; driving to farm and concluding work, like uncoupling the machine. The overlapping during the field work is considered. The dataset doesn't include liquid manure and emissions from liquid manure, dust other than from combustion and noise.

## Geography
The inventory applies for Swiss Agricultural Field Work processes.

## Technology
The inventories are based on measurements made by the Swiss Federal Research Station for Agricultural Economics and Engineering of Taenikon (FAT). Fuel consumption and emissions were taken from recent literature of ART, expert's estimations or unpublished data.

## Time period
Measurements were made in the last few years (1999-2001).

## Reference product
- liquid manure spreading, by vacuum tanker: 1 m3; By-product classification allocatable product; CPC 86119: Other support services to crop production
  production volume 1.30268e7 m3
    FAOSTAT data year 2010: manure applied to soils, 50% assumed as liquid, dilution 1:1, total N content 2.4 kg N/m3 diluted liquid manure
  property price 0.843653 EUR2005
    Calculated based on inputs: The price of the product has been calculated as a sum of the values of the material and energy inputs for this product. This value is therefore a rough estimation. It may underestimate the real price since there are additional expenses when producing any product. These expences can include for example labour costs, treatment of waste materials and profit for the producer. Please consider carefully whether this level of data quality is acceptable for your application.
  properties: carbon allocation 0 kg, carbon content 0

## Inputs from technosphere
- diesel: 0.217 kg; lognormal variance with pedigree 0.042, pedigree (1,4,5,1,1)
  Proxy, based on 'Agricultural Field Work Processes' - pdf-document on the dedicated talk page of ecoinvent (www.ecoinvent.org/talk-pages)
  properties: carbon content, fossil 0.865, dry mass 1 kg, heating value, net 42.8 MJ, wet mass 1 kg
  note on carbon content, fossil: C-content of diesel is 86.5% (ecoinvent v2.2 report 6_IV, Tab 3.14)
- liquid manure tank trailer: 0.0563 kg; lognormal variance with pedigree 0.042, pedigree (1,4,5,1,1)
  (same comment as for diesel)
- shed: 0.00019 m2; lognormal variance with pedigree 0.342, pedigree (1,4,5,1,1)
  Proxy, based on 'Agricultural Field Work Processes' - pdf-document on the dedicated talk page of ecoinvent (www.ecoinvent.org/talk-pages)
  This exchange has an activity link directly to the producing activity because the product is primarily consumed in the same geographical area where it is produced.
- tractor, 4-wheel, agricultural: 0.0275 kg; lognormal variance with pedigree 0.042, pedigree (1,4,5,1,1)
  (same comment as for diesel)

## Emissions to nature
- Ammonia [air, non-urban air or from high stacks]: 4.33e-6 kg; lognormal variance with pedigree 0.0981, pedigree (1,2,5,1,3)
  (same comment as for diesel)
- Benzene [air, non-urban air or from high stacks]: 1.58e-6 kg; lognormal variance with pedigree 0.0981, pedigree (1,2,5,1,3)
  (same comment as for diesel)
- Benzo(a)pyrene [air, non-urban air or from high stacks]: 6.5e-9 kg; lognormal variance with pedigree 0.6981, pedigree (1,2,5,1,3)
  (same comment as for diesel)
- Cadmium II [air, non-urban air or from high stacks]: 2.17e-9 kg; lognormal variance with pedigree 0.6981, pedigree (1,2,5,1,3)
  (same comment as for diesel)
- Carbon dioxide, fossil [air, non-urban air or from high stacks]: 0.674 kg; lognormal variance with pedigree 0.0581, pedigree (1,2,5,1,3)
  (same comment as for diesel)
- Carbon monoxide, fossil [air, non-urban air or from high stacks]: 0.00156 kg; lognormal variance with pedigree 0.692, pedigree (1,4,5,1,1)
  (same comment as for diesel)
- Chromium III [air, non-urban air or from high stacks]: 1.08e-8 kg; lognormal variance with pedigree 0.6981, pedigree (1,2,5,1,3)
  (same comment as for diesel)
- Copper ion [air, non-urban air or from high stacks]: 3.68e-7 kg; lognormal variance with pedigree 0.6981, pedigree (1,2,5,1,3)
  (same comment as for diesel)
- Dinitrogen monoxide [air, non-urban air or from high stacks]: 2.6e-5 kg; lognormal variance with pedigree 0.0981, pedigree (1,2,5,1,3)
  (same comment as for diesel)
- Methane, fossil [air, non-urban air or from high stacks]: 2.8e-5 kg; lognormal variance with pedigree 0.0981, pedigree (1,2,5,1,3)
  (same comment as for diesel)
- NMVOC, non-methane volatile organic compounds [air, non-urban air or from high stacks]: 0.00069 kg; lognormal variance with pedigree 0.082, pedigree (1,4,5,1,1)
  (same comment as for diesel)
- Nickel II [air, non-urban air or from high stacks]: 1.52e-8 kg; lognormal variance with pedigree 0.6981, pedigree (1,2,5,1,3)
  (same comment as for diesel)
- Nitrogen oxides [air, non-urban air or from high stacks]: 0.00936 kg; lognormal variance with pedigree 0.082, pedigree (1,4,5,1,1)
  (same comment as for diesel)
- PAH, polycyclic aromatic hydrocarbons [air, non-urban air or from high stacks]: 7.13e-7 kg; lognormal variance with pedigree 0.3581, pedigree (1,2,5,1,3)
  (same comment as for diesel)
- Particulate Matter, < 2.5 um [air, non-urban air or from high stacks]: 0.000862 kg; lognormal variance with pedigree 0.3581, pedigree (1,2,5,1,3)
  (same comment as for diesel)
- Selenium IV [air, non-urban air or from high stacks]: 2.17e-9 kg; lognormal variance with pedigree 0.0981, pedigree (1,2,5,1,3)
  (same comment as for diesel)
- Sulfur dioxide [air, non-urban air or from high stacks]: 0.000218 kg; lognormal variance with pedigree 0.0581, pedigree (1,2,5,1,3)
  (same comment as for diesel)
- Zinc II [air, non-urban air or from high stacks]: 2.17e-7 kg; lognormal variance with pedigree 0.6981, pedigree (1,2,5,1,3)
  (same comment as for diesel)
- Cadmium II [soil, agricultural]: 2.11e-8 kg; lognormal variance with pedigree 0.082, pedigree (1,4,5,1,1)
  (same comment as for diesel)
- Lead II [soil, agricultural]: 9.15e-8 kg; lognormal variance with pedigree 0.082, pedigree (1,4,5,1,1)
  (same comment as for diesel)
- Zinc II [soil, agricultural]: 5.59e-5 kg; lognormal variance with pedigree 0.082, pedigree (1,4,5,1,1)
  (same comment as for diesel)

## Sampling procedure
The inventoried HC, NOx, CO and fuel consumption values are measurements made following two test cycles (ISO 8178 C1 test and a specific 6-level-test created by the FAT) and on measurements made during the field work. The other emissions were calculated basing on literature data and the measured fuel consumption.

## Extrapolations
Values given in the reference are representative for the chosen work processes. Processes are typical procedures for Switzerland around the year 2000, they are not statistical average processes.

## Review by Roland Hischier 2003-08-06
Passed.

## Review by Roland Hischier 2011-09-28
Transfer of documentation done.
