# treatment of sewage sludge, 97% water, WWT, WW from CRT production, landfarming

Dataset: EcoSpold 2, unit process
Geography: CH
Time period: 2000-01-01 to 2022-12-31
Technology level: current
Classification: ISIC rev.4 ecoinvent: 3821:Treatment and disposal of non-hazardous waste
Scenario: Business-as-Usual
System model: Allocation at the point of substitution
Generated by: Nikolia Stoikou
Database: ecoinvent
isCopyrightProtected: true

## General comment
The process represents the treatment of a waste (sewage sludge) that is exclusively produced from another waste treatment. Recommended use of this dataset: to be used within the specific chain of treatments for 'wastewater from CRT production'. Share of biogenic carbon in the sludge: 0%. "CRT" stands for "Cathode-ray tube".

## Included activities start
The activity starts with the waste being available for landfarming. Collection and transportation of the waste to this process is not included.

## Included activities end
The activity ends with the waste being treated and waste-specific emissions from the landfarming process are released to the environment (air, water and soil). The activity is considering local fate of emissions and the initial specific wastewater composition (generating the sewage sludge). Further, it includes provision of fertiliser functions for N, P, K, if present in the sludge.

## Geography
The site has mean annual temperature (MAT) of 9.5 degC, mean annual precipitation (MAP) of 1483.00559816076 mm/year, mean annual actual evaporation (EAT) of 528.63778611689 mm/year. Climate will influence the local fate emissions based on the elemental composition of the sludge as well as water evaporation to air (= consumptive water use).
References: UN data, 2020. Precipitation, Environment Statistics Database, United Nations Statistics Division Available at: http://data.un.org/Data.aspx?q=precipitation&d=ENV&f=variableID%3a6;
World Bank, 2022. Surface area (sq.km), World Bank Group Available at: https://data.worldbank.org/indicator/AG.SRF.TOTL.K2;
MeteoSwiss, 2022. Data on Swiss temperature mean, Federal Department of Home Affairs FDHA. Federal Office of Meteorology and Climatology. Swiss Climate Available at: https://www.MeteoSwiss.admin.ch/home/climate/swiss-climate-in-detail/Swiss-temperature-mean/Data-on-the-Swiss-temperature-mean.html?query=TEMPERATURE+DATA&topic=/content/MeteoSwiss/tags/topics/klima&pageIndex=0&tab=search_tab;
Doka G.,2021. A model for composition-specific life cycle inventories of regionalised wastewater fates, Zurich, Switzerland. http://www.doka.ch/publications.htm

## Technology
Landfarming is the process of spreading a substrate on agricultural soil. Sewage sludge is generated in the wastewater treatment of wastewater from CRT production. Spreading of liquid sewage sludge (97w% water content) on agricultural fields with mobile vacuum tanker.

## Reference product
- organic nitrogen fertiliser, as N: 1 kg; By-product classification allocatable product; CPC 34659: Fertilizers n.e.c.
  gross fertilizer function provided from sewage sludge spreading on agricultural fields.
  production volume 6.20609e-10 kg
    Calculated in proportion to wastewater reference product.
  property nitrogen content 1
    Nitrogen content (on a dry matter basis) of organic nitrogen fertiliser, as N is calculated from the molecular formula of the substance (Nitrogen).
  property price 0.473 EUR2005
    Set equal to the price of the corresponding inorganic fertiliser
  properties: carbon allocation 0 kg, carbon content 0, carbon content, fossil 0, carbon content, non-fossil 0, dry mass 1 kg, water content 0, water in wet mass 0 kg, wet mass 1 kg

## Inputs from technosphere
- acetone, liquid: 2.76254e-7, 8.93222e-7 kg (2 suppliers, which the file names only by identifier); sum of these 1.16948e-6 kg
- acrylic dispersion, with water, in 58% solution state: 5.86076e-6, 2.78218e-5 kg (2 suppliers, which the file names only by identifier); sum of these 3.36825e-5 kg
- ammonia, anhydrous, liquid: 2.13212e-8, 2.23469e-9, 4.71863e-8, 2.17621e-8, 8.21288e-8, 1.09835e-8, 9.98987e-9, 2.36331e-7, 7.05995e-9 kg (9 suppliers, which the file names only by identifier); sum of these 4.38998e-7 kg
- ammonium carbonate: 1.18076e-5, 5.83127e-6 kg (2 suppliers, which the file names only by identifier); sum of these 1.76389e-5 kg
- blast furnace sludge: -5.21133e-6, -3.04807e-6, -3.43134e-5, -7.74358e-7 kg (4 suppliers, which the file names only by identifier); sum of these -4.33471e-5 kg
- boric acid, anhydrous, powder: 1.74502e-5 kg
- calcium chloride: 0.000104972, 0.000363553 kg (2 suppliers, which the file names only by identifier); sum of these 0.000468525 kg
- carbon black: 7.59966e-5 kg
- chemical, inorganic: 7.66993e-5 kg
- chemical, organic: 0.000444169 kg
- chlorine, liquid: 0.000123894, 2.47834e-5 kg (2 suppliers, which the file names only by identifier); sum of these 0.000148677 kg
- electric arc furnace slag: -2.45091e-7, -1.04229e-5, -1.62446e-6 kg (3 suppliers, which the file names only by identifier); sum of these -1.22924e-5 kg
- electricity, medium voltage: 0.0326905 kWh
- electron gun, for cathode ray tube display: 0.000372613 kg
- frit, for cathode ray tube display: 0.000246069 kg
- funnel glass, for cathode ray tube display: 0.00990182 kg
- heat, district or industrial, natural gas: 0.1963 MJ
- heat, district or industrial, other than natural gas: 0.578343 MJ
- hydrochloric acid, without water, in 30% solution state: 2.95657e-5, 0.000132391 kg (2 suppliers, which the file names only by identifier); sum of these 0.000161957 kg
- hydrogen peroxide, without water, in 50% solution state: 0.000162727, 3.42791e-5 kg (2 suppliers, which the file names only by identifier); sum of these 0.000197006 kg
- iron (III) chloride, without water, in 40% solution state: 0.000505433 kg
- mischmetal: 2.11789e-5 kg
- nickel, class 1: 0.000362133 kg
- nitrogen, liquid: 0.000132285, 3.63113e-5 kg (2 suppliers, which the file names only by identifier); sum of these 0.000168596 kg
- oxygen, liquid: 6.01308e-6, 2.19145e-5 kg (2 suppliers, which the file names only by identifier); sum of these 2.79275e-5 kg
- panel glass, for cathode ray tube display: 0.026105 kg
- printed wiring board mounting facility: 8.21073e-9 unit
- quicklime, milled, loose: 2.91693e-6, 0.000349035 kg (2 suppliers, which the file names only by identifier); sum of these 0.000351952 kg
- sheet rolling, steel: 0.00731189 kg
- sodium hydroxide, without water, in 50% solution state: 0.000214047 kg
- sodium hypochlorite, without water, in 15% solution state: 5.93783e-8, 2.81876e-7 kg (2 suppliers, which the file names only by identifier); sum of these 3.41254e-7 kg
- spent solvent mixture: -9.74565e-7, -8.92148e-9, -3.80797e-7 kg (3 suppliers, which the file names only by identifier); sum of these -1.36428e-6 kg
- steel, chromium steel 18/8, hot rolled: 0.00630844 kg
- steel, unalloyed: 0.000642213 kg
- sulfuric acid: 0.000402244, 5.2622e-5 kg (2 suppliers, which the file names only by identifier); sum of these 0.000454866 kg
- toluene, liquid: 1.5625e-5, 2.08333e-6 kg (2 suppliers, which the file names only by identifier); sum of these 1.77083e-5 kg
- waste frit from cathode ray tube production: -1.11291e-5 kg
- waste mineral oil: -6.39276e-8, -6.76137e-6, -2.5823e-6 kg (3 suppliers, which the file names only by identifier); sum of these -9.4076e-6 kg
- waste plastic, mixture: -1.23329e-5, -6.23206e-8, -1.375e-7, -1.06887e-5, -8.63371e-5, -8.24037e-7, -3.23201e-7, -3.40357e-7 kg (8 suppliers, which the file names only by identifier); sum of these -0.000111046 kg
- waste wood, untreated: -1.00492e-8, -9.22055e-8, -1.37451e-7, -1.46865e-5, -5.83241e-8, -1.74704e-6, -3.86058e-7, -1.107e-6 kg (8 suppliers, which the file names only by identifier); sum of these -1.82247e-5 kg
- waste, from silicon wafer production, inorganic: -1.05512e-6 kg
- wastewater from cathode ray tube production: -0.00019312, -9.33902e-7 m3 (2 suppliers, which the file names only by identifier); sum of these -0.000194053 m3
- xylene: 1.50002e-6, 2.70811e-7 kg (2 suppliers, which the file names only by identifier); sum of these 1.77083e-6 kg
- zinc sulfide: 3.75933e-5 kg

## Inputs from nature
- Water, unspecified natural origin [natural resource, in water]: 0.00218729 m3

## Emissions to nature
- Carbon monoxide, fossil [air, urban air close to ground]: 6.27173e-5 kg
- Dimethylamine [air, urban air close to ground]: 1.28754e-7 kg
- NMVOC, non-methane volatile organic compounds [air, urban air close to ground]: 5.86593e-7 kg
- Nitrogen oxides [air, urban air close to ground]: 8.00546e-6 kg
- Sulfur dioxide [air, urban air close to ground]: 3.67446e-5 kg
- Toluene [air, urban air close to ground]: 1.41667e-5 kg
- Water [air, unspecified]: 0.000133425 m3
- Xylene [air, urban air close to ground]: 1.41667e-6 kg
- BOD5, Biological Oxygen Demand [water, surface water]: 2.35743e-5 kg
- COD, Chemical Oxygen Demand [water, surface water]: 2.66363e-5 kg
- Chromium III [water, surface water]: 3.763e-8 kg
- Copper ion [water, surface water]: 6.64043e-9 kg
- Cyanide [water, surface water]: 2.23569e-9 kg
- DOC, Dissolved Organic Carbon [water, surface water]: 9.8653e-6 kg
- Fluoride [water, surface water]: 1.27278e-5 kg
- Iron ion [water, surface water]: 6.08739e-7 kg
- Lead II [water, surface water]: 1.11046e-8 kg
- Manganese II [water, surface water]: 1.32812e-8 kg
- Molybdenum VI [water, surface water]: 4.42708e-10 kg
- Nickel II [water, surface water]: 2.92555e-7 kg
- Nitrogen [water, surface water]: 2.64887e-5 kg
- Oils, unspecified [water, surface water]: 8.89088e-7 kg
- Phosphate [water, surface water]: 2.98646e-9 kg
- Phosphorus [water, surface water]: 1.86305e-7 kg
- Suspended solids, unspecified [water, surface water]: 1.70811e-5 kg
- TOC, Total Organic Carbon [water, surface water]: 9.8653e-6 kg
- Water [water, unspecified]: 0.00185981 m3
- Zinc II [water, surface water]: 5.12815e-8 kg
