# mowing, by motor mower

Dataset: EcoSpold 2, unit process
Geography: RoW
Time period: 1991-01-01 to 2022-12-31
Technology level: current
Classification: ISIC rev.4 ecoinvent: 0161:Support activities for crop production
Classification: EcoSpold01Categories: agricultural means of production/work processes
Tags: ConvertedDataset
Scenario: Business-as-Usual
System model: Allocation at the point of substitution
Generated by: Dunja Dux
Published in: Nemecek, T. 2007
Database: ecoinvent
isCopyrightProtected: true

## General comment
Motor mower, working width 1,9 m. Petrol engine 8 kW. FU is one ha mowed area.
[This dataset was already contained in the ecoinvent database version 2. It was not individually updated during the transfer to ecoinvent version 3. Life Cycle Impact Assessment results may still have changed, as they are affected by changes in the supply chain, i.e. in other datasets. This dataset was generated following the ecoinvent quality guidelines for version 2. It may have been subject to central changes described in the ecoinvent version 3 change report (http://www.ecoinvent.org/database/ecoinvent-version-3/reports-of-changes/), and the results of the central updates were reviewed extensively. The changes added e.g. consistent water flows and other information throughout the database. The documentation of this dataset can be found in the ecoinvent reports of version 2, which are still available via the ecoinvent website. The change report linked above covers all central changes that were made during the conversion process.]

## Included activities end
The inventory takes into account the diesel fuel consumption and the amount of agricultural machinery and of the shed, which has to be attributed to the mowing. Also taken into consideration is the amount of emissions to the air from combustion and the emission to the soil from tyre abrasion during the work process. The following activities where considered part of the work process: preliminary work at the farm; transfer to field (with an assumed distance of 1 km); field work (for a parcel of land of 1 ha surface); transfer to farm and concluding work The overlapping during the field work is considered. The amount of mowed good is not taken into account. Not included are dust other than from combustion and noise.

## Geography
The inventories are based on measurements made by the FAT, in Switzerland.

## Technology
Emissions and fuel consumption by the newest models of tractors set into operation during the period from 1999 to 2001.

## Time period
Measurements were made in the last few years (1999-2001).

## Reference product
- mowing, by motor mower: 1 ha; By-product classification allocatable product; CPC 86119: Other support services to crop production
  EcoSpold01Location=CH
  production volume 6.71072e8 ha
    FAOSTAT data year 2011: Permanent meadows and pastures area, 1 cut per year assumed (considering grazing), 20% of it done by motor mower assumed
  property price 7.3921 EUR2005
    Calculated based on inputs: The price of the product has been calculated as a sum of the values of the material and energy inputs for this product. This value is therefore a rough estimation. It may underestimate the real price since there are additional expenses when producing any product. These expences can include for example labour costs, treatment of waste materials and profit for the producer. Please consider carefully whether this level of data quality is acceptable for your application.
  properties: carbon allocation 0 kg, carbon content 0

## Inputs from technosphere
- petrol, two-stroke blend: 3 kg; lognormal variance with pedigree 0.044, pedigree (1,4,5,5,1)
  EcoSpold01Location=CH
  properties: carbon content, fossil 0.865, dry mass 1 kg, heating value, net 43.2 MJ, wet mass 1 kg
  note on heating value, net: Assumed equal to "petroleum". LHV for petroleum: Based on literature, page 7, Report6, part 4
- shed: 0.00446 m2; lognormal variance with pedigree 0.344, pedigree (1,4,5,5,1)
  EcoSpold01Location=CH
- tractor, 4-wheel, agricultural: 0.881 kg; lognormal variance with pedigree 0.044, pedigree (1,4,5,5,1)
  EcoSpold01Location=CH

## Emissions to nature
- Ammonia [air, non-urban air or from high stacks]: 0.00012 kg; lognormal variance with pedigree 0.1001, pedigree (1,2,5,5,3)
- Benzene [air, non-urban air or from high stacks]: 0.0284 kg; lognormal variance with pedigree 0.1001, pedigree (1,2,5,5,3)
- Benzo(a)pyrene [air, non-urban air or from high stacks]: 1.2e-7 kg; lognormal variance with pedigree 0.7001, pedigree (1,2,5,5,3)
- Cadmium II [air, non-urban air or from high stacks]: 3e-8 kg; lognormal variance with pedigree 0.7001, pedigree (1,2,5,5,3)
- Carbon dioxide, fossil [air, non-urban air or from high stacks]: 7.1 kg; lognormal variance with pedigree 0.0601, pedigree (1,2,5,5,3)
- Carbon monoxide, fossil [air, non-urban air or from high stacks]: 1.9 kg; lognormal variance with pedigree 0.694, pedigree (1,4,5,5,1)
- Chromium III [air, non-urban air or from high stacks]: 1.5e-7 kg; lognormal variance with pedigree 0.7001, pedigree (1,2,5,5,3)
- Copper ion [air, non-urban air or from high stacks]: 5.1e-6 kg; lognormal variance with pedigree 0.7001, pedigree (1,2,5,5,3)
- Dinitrogen monoxide [air, non-urban air or from high stacks]: 0.00039 kg; lognormal variance with pedigree 0.1001, pedigree (1,2,5,5,3)
- Lead II [air, non-urban air or from high stacks]: 0.000438 kg; lognormal variance with pedigree 0.7001, pedigree (1,2,5,5,3)
- Methane, fossil [air, non-urban air or from high stacks]: 0.00876 kg; lognormal variance with pedigree 0.1001, pedigree (1,2,5,5,3)
- NMVOC, non-methane volatile organic compounds [air, non-urban air or from high stacks]: 0.0328 kg; lognormal variance with pedigree 0.084, pedigree (1,4,5,5,1)
- Nickel II [air, non-urban air or from high stacks]: 2.1e-7 kg; lognormal variance with pedigree 0.7001, pedigree (1,2,5,5,3)
- Nitrogen oxides [air, non-urban air or from high stacks]: 0.06 kg; lognormal variance with pedigree 0.084, pedigree (1,4,5,5,1)
- PAH, polycyclic aromatic hydrocarbons [air, non-urban air or from high stacks]: 5.77e-6 kg; lognormal variance with pedigree 0.3601, pedigree (1,2,5,5,3)
- Particulate Matter, < 2.5 um [air, non-urban air or from high stacks]: 0.00797 kg; lognormal variance with pedigree 0.3601, pedigree (1,2,5,5,3)
- Selenium IV [air, non-urban air or from high stacks]: 3e-8 kg; lognormal variance with pedigree 0.1001, pedigree (1,2,5,5,3)
- Sulfur dioxide [air, non-urban air or from high stacks]: 0.000216 kg; lognormal variance with pedigree 0.0601, pedigree (1,2,5,5,3)
- Zinc II [air, non-urban air or from high stacks]: 3e-6 kg; lognormal variance with pedigree 0.7001, pedigree (1,2,5,5,3)
- Cadmium II [soil, agricultural]: 4.23e-7 kg; lognormal variance with pedigree 0.084, pedigree (1,4,5,5,1)
- Lead II [soil, agricultural]: 1.85e-6 kg; lognormal variance with pedigree 0.084, pedigree (1,4,5,5,1)
- Zinc II [soil, agricultural]: 0.00112 kg; lognormal variance with pedigree 0.084, pedigree (1,4,5,5,1)

## Sampling procedure
Data on fuel consumption and emissions of CO, HC and NOx are expert estimations based on measurements for comparable activities. The other emissions were calculated basing on literature data and the measured fuel consumption.

## Extrapolations
Processes are typical procedures for Switzerland around the year 2000, they are not statistical average processes. This dataset has been copied from an original dataset covering the geography CH. The uncertainty has been adjusted accordingly.

## Review by Roland Hischier 2003-08-06
Passed.
