# hydrogen production, steam reforming

Dataset: EcoSpold 2, unit process
Geography: RoW
Time period: 2020-01-01 to 2025-12-31
Technology level: current
Classification: ISIC rev.4 ecoinvent: 2011:Manufacture of basic chemicals
Synonyms: SMR
Scenario: Business-as-Usual
System model: Allocation at the point of substitution
Generated by: Daria Dellenbach
Published in: Cristina Antonini 2020
Database: ecoinvent
isCopyrightProtected: true

## General comment
This activity models the production of 1 kg of gaseous hydrogen from steam methane refoming of natural gas, pressurised to 200 bar. In steam reforming, methane is treated with steam to form carbon monoxide and hydrogen.The yield of the hydrogen production is increased by a water gas shift reaction, where the formed carbon monoxide is reacted with water to form carbon dioxide and hydrogen. This dataset does not model any carbon dioxide capture. The endothermic reforming reaction requires heat in the form of high-pressure steam as input. This heat is provided by an external natural gas industrial furnace, where natural gas is burned resulting in the usual emissions to air from burning natural gas. As such, natural gas is usually used both as feedstock to the reaction and as fuel for the furnace. The natural gas origin (country or mix) is important with regards to the sum of methane emissions over the whole natural gas supply chain. The users of this dataset are asked to carefully consider a change of the natural gas supplying dataset if this seems to be appropriate.
Worldwide, nearly 60% of hydrogen is produced by steam methane reforming.
Hydrogen is an inorganic substance with a CAS no. : 001333-74-0. It is called 'molecular hydrogen' under IUPAC naming and its molecular formula is: H2. It is gaseous and it has no odour. The substance is modelled as a pure substance. On a consumer level, is used in the following products: fuels and related products, water treatment products. On industrial sites, the substance is used for the manufacture of products in the following sectors: Fuels and fuel additives, functional fluids (closed systems), intermediates, laboratory chemicals, odour agents, oxidizing/reducing agents, processing aids, specific to petroleum production.
References:
Antonini C., Treyer K., Streb A., van der Spek M., Bauer C., Mazzotti M. (2020): Hydrogen production from natural gas and biomethane with carbon capture and storage – A techno-environmental analysis, Sustainable Energy Fuels.
Häussinger P., Lohmüller R., Watson A. M. (2012): Hydrogen, Ullmann's Encyclopedia of Industrial Chemistry.

## Included activities start
Cradle to gate. The activity starts when the raw materials enter the process.

## Included activities end
Production of hydrogen at a pressure of 200 bar including materials, energy uses, infrastructure and emissions.

## Technology
In steam methane reforming, methane is reacted with steam to produce hydrogen and carbon dioxide. In a first step, the natural gas feedstock is desulfurized and pre-treated with some steam to break down higher hydrocarbons into methane. The steam to carbon ratio at the pre-reformer inlet is set to 2.6. The pre-treated feedstock is then led into the main reforming reactor, and methane is coverted into hydrogen and carbon monoxide. This reaction is endothermic (consumes energy), and therefore heat is provided by an external furnace (often fuelled with natural gas). The hydrogen yield is improved by a water gas shift section, where a part of the formed carbon monoxide reacts with water to produce carbon dioxide and hydrogen.
Technical details of the SMR plant which serves as model for this dataset are presented in Antonini, Treyer et al. (2020). Hydrogen production from natural gas and biomethane with carbon capture and storage - A techno-environmmental analysis. Sustainable Energy & Fuels,
SMR: CH4 + H2O --> 3 H2 + CO
WGS: CO + H2O --> H2 + CO2
Carbon dioxide is not captured in this modelling, it exits the plant with the flue gas from the furnace.
The high pressure steam required in steam methane reforming as well as the water gas shift is co-generated by heat integration. The excess steam is sent to a turbine to genereate electricity, which can be used to run utilities in the plant. If there is a surplus of electricity, it is sold to be fed to the grid.
The catalysts used in the desulfurization is ZnO, reforming needs a Nickel based catalyst and the water gas shift is conducted on Fe-Cr and Cu-Zn beds.
The purified hydrogen is compressed from 25 bar to 200 bar. The purity is at least 99.97%
.The electricity and heat needed in all processes is produced internally from natural gas. In the technical modelling of Antonini/Treyer et al. a small amount of excess electricity results from this internal electricity production. It is assumed to be sold to the grid in the publication but neglected within this activity. The impact on the results is hardly visible and selling excess electricity to the grid is not a representative case of SMR plants on the World.
References:
Antonini C., Treyer K., Streb A., van der Spek M., Bauer C., Mazzotti M. (2020): Hydrogen production from natural gas and biomethane with carbon capture and storage – A techno-environmental analysis, Sustainable Energy Fuels.
Häussinger P., Lohmüller R., Watson A. M. (2012): Hydrogen, Ullmann's Encyclopedia of Industrial Chemistry.

## Reference product
- hydrogen, gaseous: 1 kg; By-product classification allocatable product; CPC 34210: Hydrogen, nitrogen, oxygen, carbon dioxide and rare gases; inorganic oxygen compounds of non-metals n.e.c.; CAS 1333-74-0
  production volume 0 kg
    Total hydrogen production in 2020 amounted to 90 Mt according to the IEA Global Hydrogen Review Report released in 2021. According to that reference, 59% of this was produced from Natural gas w/o CCUS.
  property heating value, net 120.21 MJ
    LHV is calculated based on the elemental composition of the substance. Based on the CAS number of the substance (001333-74-0), the chemical formula of the substance is found to be: H2, (PubChem 2020). Reference: Kim, S., Chen, J., Cheng, T., Gindulyte, A., He, J., He, S., Li, Q., Shoemaker, B. A., Thiessen, P. A., Yu, B., Zaslavsky, L., Zhang, J., & Bolton, E. E. (2019). PubChem 2019 update: improved access to chemical data. Nucleic acids research, 47(D1), D1102–D1109. https://doi.org/10.1093/nar/gky1033
  property price 2.68 EUR2005
    Literature data. Data from Eurostat. More information can be found in "Petroleum refinery industry and liquid fuels – Description of the ifeu refinery model and the calculation of LCI datasets for refinery products in Brazil, India, South Africa, Peru and Colombia" available on the ecoinvent website.
  properties: carbon allocation 0 kg, carbon content 0, carbon content, fossil 0, carbon content, non-fossil 0, dry mass 1 kg, water content 0, water in wet mass 0 kg, wet mass 1 kg

## Inputs from technosphere
- aluminium oxide, metallurgical: 0.000532728 kg; lognormal variance with pedigree 0.0096, pedigree (2,2,2,3,3)
  Al2O3 used as a catalyst. This information is taken from a model for an authothermal reformer (ATR). In general, similar catalysts are used in SMR and ATR.
  properties: dry mass 1 kg, wet mass 1 kg
- chemical factory, organics: 5.34832e-10 unit; lognormal variance with pedigree 0.0006, pedigree (1,1,1,1,1)
  Calculated based on lifetime production of hydrogen over 25 years with 8.994 t hydrogen/hour.
- chromium oxide, flakes: 3.6e-5 kg; lognormal variance with pedigree 0.0096, pedigree (2,2,2,3,3)
  The hydrogen yield is improved by a water gas shift section, where a part of the formed carbon monoxide reacts with water to produce carbon dioxide and hydrogen. The water gas shift is conducted on Fe-Cr and Cu-Zn beds. This flow represents part of the materials that make up these beds.
  Cr2O3 used as a catalyst. This information is taken from a model for an authothermal reformer (ATR). In general, similar catalysts are used in SMR and ATR.
  See more in Antonini C., Treyer K., Streb A., van der Spek M., Bauer C., Mazzotti M. (2020): Hydrogen production from natural gas and biomethane with carbon capture and storage - A techno-environmental analysis, Sustainable Energy Fuels.
  properties: dry mass 1 kg, wet mass 1 kg
- copper oxide: 0.0003624 kg; lognormal variance with pedigree 0.0096, pedigree (2,2,2,3,3)
  The hydrogen yield is improved by a water gas shift section, where a part of the formed carbon monoxide reacts with water to produce carbon dioxide and hydrogen. The water gas shift is conducted on Fe-Cr and Cu-Zn beds. This flow represents part of the materials that make up these beds.
  See more in Antonini C., Treyer K., Streb A., van der Spek M., Bauer C., Mazzotti M. (2020): Hydrogen production from natural gas and biomethane with carbon capture and storage - A techno-environmental analysis, Sustainable Energy Fuels.
  properties: dry mass 1 kg, wet mass 1 kg
- liquid storage tank, chemicals, organics: 2.54628e-9 unit; lognormal variance with pedigree 0.0006, pedigree (1,1,1,1,1)
  (same comment as for chemical factory, organics)
- magnesium oxide: 2.796e-5 kg; lognormal variance with pedigree 0.0096, pedigree (2,2,2,3,3)
  MgO used as a catalyst. This information is taken from a model for an authothermal reformer (ATR). In general, similar catalysts are used in SMR and ATR.
  properties: dry mass 1 kg, wet mass 1 kg
- molybdenum trioxide: 1.668e-5 kg; lognormal variance with pedigree 0.0096, pedigree (2,2,2,3,3)
  MoO3 used as a catalyst. This information is taken from a model for an authothermal reformer (ATR). In general, similar catalysts are used in SMR and ATR.
  properties: bismuth content 8e-5, copper content 0.0006, iron content 0.0044, lead content 0.00015, molecular weight 143.9 g/mol, molybdenum content 0.62, oxygen content 0.29, sulfur content 0.0003
- natural gas, high pressure: 0.0375645, 0.0158561, 0.090812, 0.0269496, 1.52456, 0.155822, 0.0170092, 0.000501918, 0.0603972, 0.0634242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 m3 (24 suppliers, which the file names only by identifier); sum of these 4.55887 m3; lognormal variance with pedigree 0.0006, pedigree (1,1,1,1,1)
  In steam methane reforming, methane is reacted with steam to produce hydrogen and carbon dioxide.
  SMR: CH4 + H2O --> 3 H2 + CO
  WGS: CO + H2O --> H2 + CO2
  See more in Antonini C., Treyer K., Streb A., van der Spek M., Bauer C., Mazzotti M. (2020): Hydrogen production from natural gas and biomethane with carbon capture and storage - A techno-environmental analysis, Sustainable Energy Fuels.
  properties: carbon content, fossil 0.602381, dry mass 0.84 kg, heating value, net 39 MJ, wet mass 0.84 kg
  note on carbon content, fossil: An average C content of 0.506 kg C/ m3 has been assumed (this average has been calculated using data in Tab 3.5, ecoinvent v2.2 report 6_V
  note on heating value, net: Literature value, Source: United Nations Statistics Division (2018) International Recommendations for Energy Statistics (IRES). Available at: http://unstats.un.org/unsd/statcom/doc11/BG-IRES.pdf.
- nickel, class 1: 0.00020292 kg; lognormal variance with pedigree 0.0096, pedigree (2,2,2,3,3)
  The pre-treated feedstock is led into the main reforming reactor, and methane is coverted into hydrogen and carbon monoxide. This step requires a Nickel based catalyst.
  Nickel is used as a proxy, but the energy consumption for producing NiO is not considered.
  See more in Antonini C., Treyer K., Streb A., van der Spek M., Bauer C., Mazzotti M. (2020): Hydrogen production from natural gas and biomethane with carbon capture and storage - A techno-environmental analysis, Sustainable Energy Fuels.
  properties: dry mass 1 kg, wet mass 1 kg
- portafer: 0.00031236 kg; lognormal variance with pedigree 0.0096, pedigree (2,2,2,3,3)
  The hydrogen yield is improved by a water gas shift section, where a part of the formed carbon monoxide reacts with water to produce carbon dioxide and hydrogen. The water gas shift is conducted on Fe-Cr and Cu-Zn beds. Portafer (ferric oxide) represents part of the materials that make up these beds.
  See more in Antonini C., Treyer K., Streb A., van der Spek M., Bauer C., Mazzotti M. (2020): Hydrogen production from natural gas and biomethane with carbon capture and storage - A techno-environmental analysis, Sustainable Energy Fuels.
  properties: dry mass 1 kg, wet mass 1 kg
- quicklime, milled, packed: 4.8e-5 kg; lognormal variance with pedigree 0.0096, pedigree (2,2,2,3,3)
  CaO used as a catalyst. This information is taken from a model for an authothermal reformer (ATR). In general, similar catalysts are used in SMR and ATR.
  properties: dry mass 0.99 kg, water content 0.010101, wet mass 1 kg
- silica sand: 1.1592e-5 kg; lognormal variance with pedigree 0.0096, pedigree (2,2,2,3,3)
  SiO2 used as a catalyst. This information is taken from a model for an authothermal reformer (ATR). In general, similar catalysts are used in SMR and ATR.
  properties: dry mass 0.99 kg, water content 0.010101, wet mass 1 kg
- water, deionised: 4.43082 kg; lognormal variance with pedigree 0.0019, pedigree (2,2,1,1,2)
  Raw surface water input for steam production, with demineralisation.
  properties: wet mass 1 kg
- zeolite, powder: 0.000882902 kg; lognormal variance with pedigree 0.0096, pedigree (2,2,2,3,3)
  Adsorbent used in the Pressure Swing Adsorption process. Zeolite 13 X. Amount is estimated based on expert estimates.
  properties: dry mass 1 kg, wet mass 1 kg
- zinc oxide: 0.0003714 kg; lognormal variance with pedigree 0.0096, pedigree (2,2,2,3,3)
  In a first step, the natural gas feedstock is desulfurized pre-treated with some steam to break down higher hydrocarbons into methane. The catalysts used in the desulfurization is ZnO.
  See more in Antonini C., Treyer K., Streb A., van der Spek M., Bauer C., Mazzotti M. (2020): Hydrogen production from natural gas and biomethane with carbon capture and storage - A techno-environmental analysis, Sustainable Energy Fuels.
  properties: dry mass 1 kg, wet mass 1 kg

## Inputs from nature
- Water, cooling, unspecified natural origin [natural resource, in water]: 0.38038 m3; lognormal variance with pedigree 0.0532, pedigree (4,4,3,4,4)
  Once-through cooling water.

## Emissions to nature
- Acetaldehyde [air, unspecified]: 2.09192e-8 kg; lognormal variance with pedigree 0.0907, pedigree (2,4,5,3,3)
  Emission from burning natural gas used as a fuel in the production process. These emissions have been calculated as a proxy based on the dataset “heat production, natural gas, at industrial furnace >100kW”, ecoinvent version 3.5 cut-off. In this activity, emissions in kg per MJ heat produced are shown, which were turned into kg of emissions per MJ natural gas burned. The carbon dioxide emissions of the above mentioned dataset have been discarded, as these are calculated for the specific case of hydrogen production.
- Acetic acid [air, unspecified]: 3.13788e-6 kg; lognormal variance with pedigree 0.0907, pedigree (2,4,5,3,3)
  (same comment as for Acetaldehyde)
- Benzene [air, unspecified]: 8.36788e-6 kg; lognormal variance with pedigree 0.0907, pedigree (2,4,5,3,3)
  (same comment as for Acetaldehyde)
- Benzo(a)pyrene [air, unspecified]: 2.09192e-10 kg; lognormal variance with pedigree 0.0907, pedigree (2,4,5,3,3)
  (same comment as for Acetaldehyde)
- Butane [air, unspecified]: 1.46438e-5 kg; lognormal variance with pedigree 0.0907, pedigree (2,4,5,3,3)
  (same comment as for Acetaldehyde)
- Carbon dioxide, fossil [air, unspecified]: 8.95491 kg; lognormal variance with pedigree 0.0012, pedigree (2,1,1,1,1)
  These emissions of CO2 stem from the flue gas of the natural gas furnace and from the reaction of the natural gas feedstock to hydrogen.
- Carbon monoxide, fossil [air, unspecified]: 4.39311e-5 kg; lognormal variance with pedigree 0.0907, pedigree (2,4,5,3,3)
  (same comment as for Acetaldehyde)
- Dinitrogen monoxide [air, unspecified]: 2.09192e-6 kg; lognormal variance with pedigree 0.0907, pedigree (2,4,5,3,3)
  (same comment as for Acetaldehyde)
- Formaldehyde [air, unspecified]: 2.09192e-6 kg; lognormal variance with pedigree 0.0907, pedigree (2,4,5,3,3)
  (same comment as for Acetaldehyde)
- Mercury II [air, unspecified]: 6.27596e-10 kg; lognormal variance with pedigree 0.0907, pedigree (2,4,5,3,3)
  (same comment as for Acetaldehyde)
- Methane, fossil [air, unspecified]: 4.18404e-5 kg; lognormal variance with pedigree 0.0907, pedigree (2,4,5,3,3)
  (same comment as for Acetaldehyde)
- Nitrogen oxides [air, unspecified]: 0.000374463 kg; lognormal variance with pedigree 0.0907, pedigree (2,4,5,3,3)
  (same comment as for Acetaldehyde)
- PAH, polycyclic aromatic hydrocarbons [air, unspecified]: 2.09192e-7 kg; lognormal variance with pedigree 0.3507, pedigree (2,4,5,3,3)
  (same comment as for Acetaldehyde)
- Particulate Matter, < 2.5 um [air, unspecified]: 4.18404e-6 kg; lognormal variance with pedigree 0.3507, pedigree (2,4,5,3,3)
  (same comment as for Acetaldehyde)
- Pentane [air, unspecified]: 2.51046e-5 kg; lognormal variance with pedigree 0.0907, pedigree (2,4,5,3,3)
  (same comment as for Acetaldehyde)
- Propane [air, unspecified]: 4.18404e-6 kg; lognormal variance with pedigree 0.0907, pedigree (2,4,5,3,3)
  (same comment as for Acetaldehyde)
- Propionic acid [air, unspecified]: 4.18404e-7 kg; lognormal variance with pedigree 0.0907, pedigree (2,4,5,3,3)
  (same comment as for Acetaldehyde)
- Sulfur dioxide [air, unspecified]: 1.1506e-5 kg; lognormal variance with pedigree 0.0513, pedigree (2,4,5,3,3)
  (same comment as for Acetaldehyde)
- Toluene [air, unspecified]: 4.18404e-6 kg; lognormal variance with pedigree 0.0907, pedigree (2,4,5,3,3)
  (same comment as for Acetaldehyde)

## Extrapolations
The emissions to air stem from burning natural gas in the furnace. These emissions in kg per MJ natural gas burned are extrapolated from the activity "heat production, natural gas, at industrial furnace > 100kW" (ecoinvent version v3.5), with 1.0526 MJ natural gas burned per MJ heat. The CO2 emissions from that dataset are omitted, as CO2 emissions have been modelled separately in Antonini, Treyer et al. 2020.
