# treatment of sewage sludge, 97% water, WWT, WW from tube collector production, landfarming

Dataset: EcoSpold 2, unit process
Geography: CH
Time period: 2000-01-01 to 2022-12-31
Technology level: current
Classification: ISIC rev.4 ecoinvent: 3821:Treatment and disposal of non-hazardous waste
Scenario: Business-as-Usual
System model: Allocation at the point of substitution
Generated by: Nikolia Stoikou
Database: ecoinvent
isCopyrightProtected: true

## General comment
The process represents the treatment of a waste (sewage sludge) that is exclusively produced from another waste treatment. Recommended use of this dataset: to be used within the specific chain of treatments for 'wastewater from tube collector production'. Share of biogenic carbon in the sludge: 0%.

## Included activities start
The activity starts with the waste being available for landfarming. Collection and transportation of the waste to this process is not included.

## Included activities end
The activity ends with the waste being treated and waste-specific emissions from the landfarming process are released to the environment (air, water and soil). The activity is considering local fate of emissions and the initial specific wastewater composition (generating the sewage sludge). Further, it includes provision of fertiliser functions for N, P, K, if present in the sludge.

## Geography
The site has mean annual temperature (MAT) of 9.5 degC, mean annual precipitation (MAP) of 1483.00559816076 mm/year, mean annual actual evaporation (EAT) of 528.63778611689 mm/year. Climate will influence the local fate emissions based on the elemental composition of the sludge as well as water evaporation to air (= consumptive water use).
References: UN data, 2020. Precipitation, Environment Statistics Database, United Nations Statistics Division Available at: http://data.un.org/Data.aspx?q=precipitation&d=ENV&f=variableID%3a6;
World Bank, 2022. Surface area (sq.km), World Bank Group Available at: https://data.worldbank.org/indicator/AG.SRF.TOTL.K2;
MeteoSwiss, 2022. Data on Swiss temperature mean, Federal Department of Home Affairs FDHA. Federal Office of Meteorology and Climatology. Swiss Climate Available at: https://www.MeteoSwiss.admin.ch/home/climate/swiss-climate-in-detail/Swiss-temperature-mean/Data-on-the-Swiss-temperature-mean.html?query=TEMPERATURE+DATA&topic=/content/MeteoSwiss/tags/topics/klima&pageIndex=0&tab=search_tab;
Doka G.,2021. A model for composition-specific life cycle inventories of regionalised wastewater fates, Zurich, Switzerland. http://www.doka.ch/publications.htm

## Technology
Landfarming is the process of spreading a substrate on agricultural soil. Sewage sludge is generated in the wastewater treatment of wastewater from tube collector production. Spreading of liquid sewage sludge (97w% water content) on agricultural fields with mobile vacuum tanker.

## Reference product
- organic nitrogen fertiliser, as N: 1 kg; By-product classification allocatable product; CPC 34659: Fertilizers n.e.c.
  gross fertilizer function provided from sewage sludge spreading on agricultural fields.
  production volume 2.41917e-12 kg
    Calculated in proportion to wastewater reference product.
  property nitrogen content 1
    Nitrogen content (on a dry matter basis) of organic nitrogen fertiliser, as N is calculated from the molecular formula of the substance (Nitrogen).
  property price 0.473 EUR2005
    Set equal to the price of the corresponding inorganic fertiliser
  properties: carbon allocation 0 kg, carbon content 0, carbon content, fossil 0, carbon content, non-fossil 0, dry mass 1 kg, water content 0, water in wet mass 0 kg, wet mass 1 kg

## Inputs from technosphere
- EUR-flat pallet: 4.22084e-6 unit
- aluminium, wrought alloy: 0.000350693 kg
- chemical, organic: 0.000100198 kg
- electricity, medium voltage: 0.000274724, 0.000773195, 7.39114e-5, 2.05901e-5, 0.000251216, 0.0270074, 3.48825e-5, 0.00132799, 0.00842716, 0.00166491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 kWh (46 suppliers, which the file names only by identifier); sum of these 0.140277 kWh
- glass tube, borosilicate: 0.13151 kg
- hazardous waste, for incineration: -0.00197908, -2.48777e-5 kg (2 suppliers, which the file names only by identifier); sum of these -0.00200396 kg
- heat, district or industrial, natural gas: 0.128605, 0.00211331, 3.9743e-5 MJ (3 suppliers, which the file names only by identifier); sum of these 0.130758 MJ
- hydrochloric acid, without water, in 30% solution state: 0.00100198 kg
- municipal solid waste: -3.66445e-7, -9.35725e-8, -2.92543e-7, -4.41541e-8, -3.2933e-7, -2.04841e-7, -4.30012e-7, -2.45946e-8, -3.73519e-8, -1.89841e-7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 kg (39 suppliers, which the file names only by identifier); sum of these -0.000250495 kg
- steel, chromium steel 18/8, hot rolled: 0.00325643 kg
- tap water: 0.000731183, 0.0304711, 0.0012084, 0.000543418, 0.00225481, 0.348696, 0.000792697, 0.0060743 kg (8 suppliers, which the file names only by identifier); sum of these 0.390772 kg
- waste glass: -3.30291e-7, -1.90229e-5, -5.94361e-6, -1.15552e-6, -2.16873e-5, -4.55665e-5, -1.73218e-5, -0.000494386, -0.000123017, -2.24208e-5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 kg (42 suppliers, which the file names only by identifier); sum of these -0.00601188 kg
- wastewater from tube collector production: -0.000388891, -1.88063e-6 m3 (2 suppliers, which the file names only by identifier); sum of these -0.000390772 m3
- xenon, gaseous: 0.000487212 kg
