# suction, shavings, softwood

Dataset: EcoSpold 2, unit process
Geography: CH
Time period: 2011-01-01 to 2022-12-31
Technology level: current
Classification: ISIC rev.4 ecoinvent: 1610:Sawmilling and planing of wood
Tags: Swiss brush-up completed
Scenario: Business-as-Usual
System model: Allocation at the point of substitution
Generated by: Frank Werner
Database: ecoinvent
isCopyrightProtected: true

## General comment
This data represents the service of collecting shavings from the planing of softwood, expressed per kg dry mass and transporting it to its silo via aspiration.

## Included activities start
The activity starts with the shavings at the planing machine.

## Included activities end
This activity ends with the shavings collected at a silo at the sawmill site. The dataset does not include direct wood dust emissions. The infrasturcture for the pipes and pumps as well as for the silo are assumed be part of the infrastructure DS for the sawmill.

## Reference product
- shavings, softwood, measured as dry mass: 1 kg; source BFS 2013; By-product classification allocatable product; CPC 39283: Non-agglomerated wood waste and scrap; lognormal variance with pedigree 0.025, pedigree (1,1,1,1,1)
  shavings recollected from the planing process where they are generated as loose shavings.
  production volume 1.16256e7 kg
    Calculated from production volume of reference product using the relative outputs.
  property heating value, net 13.38 MJ
    LHV is calculated based on the Carbon content of the product. More details can be found on the respective documentation.
  property price 0.113 EUR2005
    Calculated based on data from FAOSTAT (accessed 20140429). The price is calculated by using data on total world import quantity (m3) and import value (1000 USD), year 2005. 40461924 m3 of Chips and Particles was imported in the world in 2005. The import value was 3022227000 USD. The calculated price is thus (3022227000/40461924=74.7*0.8=) 62.2 Euro/m3. It is estimated, that the chips and particles are half hardwood (of density 650 kg/m3) and half softwood (of density 450 kg/m3), thus the remaining mixture has a density of 550 kg/m3. The recalculated price is (1/550*62.2=) 0.11 Euro/kg. Using the same approach the calculated price for 2010 was 0.123 Euro/kg.
  properties: carbon allocation 0.494 kg, carbon content 0.494, carbon content, fossil 0, carbon content, non-fossil 0.494, dry mass 1 kg, water content 0.1, water in wet mass 0.1 kg, wet mass 1.1 kg

## Inputs from technosphere
- ammonium sulfate: 3.79252e-6 kg
- diesel, burned in building machine: 0.0023522 MJ
- electricity, medium voltage: 0.0108207 kWh
- furnace, wood chips, with silo, 300kW: 2.60361e-9 unit
- gluing mill: 3.76545e-10 unit
- lubricating oil: 2.2542e-5 kg
- melamine urea formaldehyde adhesive: 0.000893952 kg
- planing mill: 1.96413e-10 unit
- polyurethane adhesive: 0.000431231 kg
- sawnwood, beam, softwood, raw, dried (u=10%): 3.77211e-5 m3
- sawnwood, beam, softwood, raw, dried (u=20%): 4.0707e-6, 1.62828e-5 m3 (2 suppliers, which the file names only by identifier); sum of these 2.03535e-5 m3
- sawnwood, board, softwood, raw, dried (u=10%): 0.000357064 m3
- sawnwood, board, softwood, raw, dried (u=20%): 2.9216e-5, 7.30401e-6 m3 (2 suppliers, which the file names only by identifier); sum of these 3.652e-5 m3
- sawnwood, lath, softwood, raw, dried (u=10%): 9.30777e-5 m3
- sawnwood, lath, softwood, raw, dried (u=20%): 1.00546e-5, 4.02184e-5 m3 (2 suppliers, which the file names only by identifier); sum of these 5.0273e-5 m3
- shavings, softwood, loose, measured as dry mass: -0.0250195 kg
- waste mineral oil: -2.2542e-5 kg
- wood ash mixture, pure: -7.51403e-5 kg

## Emissions to nature
- Acetaldehyde [air, unspecified]: 9.16711e-9 kg
- Acetone [air, unspecified]: 2.15616e-5 kg
- Ammonia [air, unspecified]: 2.59985e-7 kg
- Arsenic ion [air, unspecified]: 1.50281e-10 kg
- Benzene [air, unspecified]: 1.36755e-7 kg
- Benzene, ethyl- [air, unspecified]: 4.50842e-9 kg
- Benzene, hexachloro- [air, unspecified]: 1.08202e-15 kg
- Benzo(a)pyrene [air, unspecified]: 7.51403e-11 kg
- Bromine [air, unspecified]: 9.01683e-9 kg
- Cadmium II [air, unspecified]: 1.05196e-10 kg
- Calcium [air, unspecified]: 8.79141e-7 kg
- Carbon dioxide, non-fossil [air, unspecified]: 0.01608 kg
- Carbon monoxide, non-fossil [air, unspecified]: 7.51403e-5 kg
- Chlorine [air, unspecified]: 2.70505e-8 kg
- Chromium III [air, unspecified]: 5.95111e-10 kg
- Chromium VI [air, unspecified]: 6.01122e-12 kg
- Copper ion [air, unspecified]: 3.30617e-9 kg
- Dinitrogen monoxide [air, unspecified]: 3.75701e-7 kg
- Dioxins, measured as 2,3,7,8-tetrachlorodibenzo-p-dioxin [air, unspecified]: 4.6587e-15 kg
- Fluorine [air, unspecified]: 7.51403e-9 kg
- Formaldehyde [air, unspecified]: 1.34001e-6 kg
- Hydrocarbons, aliphatic, alkanes, unspecified [air, unspecified]: 1.36755e-7 kg
- Hydrocarbons, aliphatic, unsaturated [air, unspecified]: 4.6587e-7 kg
- Lead II [air, unspecified]: 3.75701e-9 kg
- Magnesium [air, unspecified]: 5.4101e-8 kg
- Manganese II [air, unspecified]: 2.55477e-8 kg
- Mercury II [air, unspecified]: 4.50842e-11 kg
- Methane, non-fossil [air, unspecified]: 6.76262e-7 kg
- NMVOC, non-methane volatile organic compounds [air, unspecified]: 1.05196e-6 kg
- Nickel II [air, unspecified]: 9.01683e-10 kg
- Nitrogen oxides [air, unspecified]: 2.70505e-5 kg
- PAH, polycyclic aromatic hydrocarbons [air, unspecified]: 1.66811e-9 kg
- Particulate Matter, < 2.5 um [air, unspecified]: 1.35252e-5 kg
- Particulate Matter, > 2.5 um and < 10um [air, unspecified]: 1.35252e-5 kg
- Phenol, pentachloro- [air, unspecified]: 1.21727e-12 kg
- Phosphorus [air, unspecified]: 4.50842e-8 kg
- Potassium I [air, unspecified]: 3.51656e-6 kg
- Sodium [air, unspecified]: 1.95365e-7 kg
- Sulfur dioxide [air, unspecified]: 3.75701e-7 kg
- Toluene [air, unspecified]: 4.50842e-8 kg
- Water [air, unspecified]: 6.76262e-6 m3
- Zinc II [air, unspecified]: 4.50842e-8 kg
- m-Xylene [air, unspecified]: 1.80337e-8 kg

## Sampling procedure
complementary literature and sampling from sawmills
