# electricity production, lignite

Dataset: EcoSpold 2, unit process
Geography: PL
Time period: 1993-01-01 to 2022-12-31
Technology level: modern
Classification: EcoSpold01Categories: lignite/power plants
Classification: ISIC rev.4 ecoinvent: 3510:Electric power generation, transmission and distribution
Tags: lignite power; coal power; fossil fuels; ConvertedDataset
Scenario: Business-as-Usual
System model: Allocation at the point of substitution
Generated by: Roberto Dones
Published in: Röder, A. 2007
Database: ecoinvent
isCopyrightProtected: true

## General comment
The module describes the average for the country. The plant is used for middle load with 6000 hours of operation at full capacity per year. The plant is assumed to operate 200000 hours during its lifetime. For the assessment of main characteristics (LHV, sulphur and ash content of coal, efficiency of the plant) and criteria emissions (SOx, NOx, particles, and CO2) a bottom-up approach has been used. It consists on the collection of information about single plants. Base data on all major UCTE power plants in 1993 have been integrated, to the extent possible, with updated information for year 2000 (v1.0) and 2004-2005 (v2.0). The size distribution of particles has been derived from German data. Halogene emissions have been estimated on the basis of the content of the species in the country-specific coal input mix, assuming average retention rates. For CO and VOC-emissions average values for UCTE are included. Two average values for N2O emissions from UCTE plants are considered for the two cases with or without DeNOx; the country specific emission depend therefore on the share of DeNOx. Emissions of trace elements were calculated by means of a formula (CORINAIR) using the ash content in the country-specific coal input mix and average transfer coefficients for coal power plants, taking into account the share of DeSOx installed. Emission of uranium and thorium radioactive isotopes were assumed proportional to the corresponding element emitted with particles; the other non-gaseous radioactive isotopes of the uranium and thorium decay chain were assumed proportional to the emitted U-238 or Th-232. The emission of gaseous radon and K-40 are taken from the literature. The waste heat releases to air and water have been allocated on the basis of the assumed share of river cooled power plants and assumptions on the direct losses to air. The share of the recycled ash is country-specific. For the disposal of the remaining ash, typical country-specific compositions are taken into account in appropriate disposal modules.
[This dataset was already contained in the ecoinvent database version 2. It was not individually updated during the transfer to ecoinvent version 3. Life Cycle Impact Assessment results may still have changed, as they are affected by changes in the supply chain, i.e. in other datasets. This dataset was generated following the ecoinvent quality guidelines for version 2. It may have been subject to central changes described in the ecoinvent version 3 change report (http://www.ecoinvent.org/database/ecoinvent-version-3/reports-of-changes/), and the results of the central updates were reviewed extensively. The changes added e.g. consistent water flows and other information throughout the database. The documentation of this dataset can be found in the ecoinvent reports of version 2, which are still available via the ecoinvent website. The change report linked above covers all central changes that were made during the conversion process.]
[Dataset to be replaced by 'heat and power co-generation, lignite, PL, 1980 - 2015']

## Included activities end
Energy conversion for electricity production. Particle removal is included in this module. DeSOx is described in a different module; it is applied here according to the actual use in the country; SOx emission is the reduced one. There is no information about the use of DeNOx in the country. It is assumed that 25 % of the plants are river cooled, 75 % use cooling tower (average UCTE). The water treatment is described in separate modules. The disposal of non-recycled ashes is modelled separately.

## Geography
Country-specific data.

## Technology
Average installed technology.

## Parameters
- fraction, cooling water, cooling pond system, to air: 0.032 dimensionless; name fraction_CW_CP_to_air; lognormal variance with pedigree 0.0413, pedigree (2,3,1,3,1)
  Calculated based on literature value (Scown, C.D., 2011, Water Footprint of U.S. Transportation Fuels and supplying information of the article) (Vionnet, S., Quantis Water Database - Technical Report, 2012).
- fraction, cooling water, once-through system, to air: 0.004 dimensionless; name fraction_CW_OT_to_air; lognormal variance with pedigree 0.0413, pedigree (2,3,1,3,1)
  (same comment as for fraction, cooling water, cooling pond system, to air)
- fraction, cooling water, recirculating system, to air: 0.771 dimensionless; name fraction_CW_R_to_air; lognormal variance with pedigree 0.0413, pedigree (2,3,1,3,1)
  (same comment as for fraction, cooling water, cooling pond system, to air)
- fraction, cooling water, to air: 0.0251074 dimensionless; name fraction_CW_to_air; lognormal variance with pedigree 0.092025, pedigree (4,4,3,2,4)
  Calculated value based on literature value (Scown, 2011 & Floerke, 2009, Future changes of freshwater needs in the electricity production sector & Stiegel, 2008, Estimating Freshwater Needs to Meet Future Thermoelectric Generation Requirements) (Vionnet, S., Quantis Water Database - Technical Report, 2012).
- fraction, process water, to air: 0.15 dimensionless; name fraction_PW_to_air; lognormal variance with pedigree 0.092025, pedigree (4,4,3,2,4)
  Literature value. In case when no industry/process specific data are available, default evaporation fraction value is used. This value is 15% and is based on literature (Statistics Canada, 2007 & Shaffer, K.H., 2008, Consumptive water use in the Great Lakes Basin, USGS & Shiklomanov, 2003, World Water Resources at the Beginning of the 21st Century) and has been approved by an expert.
- fraction, water, completely softened, to air: 0.15 dimensionless; name fraction_WCS_to_air; = fraction_PW_to_air; lognormal variance with pedigree 0.092025, pedigree (4,4,3,2,4)
  Calculated value. See comment in the other parametres present in this dataset. Water, completely softened is considered to be always used as process water, thus process water fractions to air are applied to all water, completely softened input flows to calculate the amount of water consumed in the processes.
- fraction, water, decarbonised, to air: 0.0251074 dimensionless; name fraction_WDC_to_air; = fraction_CW_to_air; lognormal variance with pedigree 0.041425, pedigree (2,3,2,2,1)
  Calculated value. See comments in the other parametres present in this dataset. Decarbonised water is considered to be always used as cooling water, thus cooling water fractions to air are applied to all carbonised water input flows to calculate the amount of water consumed in the processes.
- scaling factor: 10.3 dimensionless

## Reference product
- electricity, high voltage: 1 kWh; = 0.0970873786407767 * scaling_factor; By-product classification allocatable product; CPC 17100: Electrical energy
  Amount was scaled to 1.
  EcoSpold01Location=PL
  production volume 2.07969e9 kWh
    Literature value/statistics. Net production of grid-connected electricity in 2008. (Net = gross production minus direct electricity use needed for electricity production at the power plant). The annual production volume is valid for 2008, even if this dataset is valid for a longer time period.
  property price 0.0977 EUR2005
    Temporary price data. Calculated as 90% of purchasers price based on: 94% of the average price (to account for a 6% loss in transformation and transmission) for electricity for industrial consumersin 2005 (excluded taxes). From IEA.
  properties: Corresponding fuel use 10.3 MJ, carbon allocation 0 kg, carbon content 0

## Inputs from technosphere
- SOx retained, in lignite flue gas desulfurisation: 0.0060255 kg; = 0.000585 * scaling_factor; lognormal variance with pedigree 0.042
  (3,1,1,1,1,1); see power plant data base for details
  Amount was scaled to the amount of reference product.
  EcoSpold01Location=GLO
  Uncertainty: see power plant data base for details
  properties: dry mass 1 kg, wet mass 1 kg
- chlorine, gaseous: 0.000103 kg; = 1E-05 * scaling_factor; lognormal variance with pedigree 0.140025
  (5,4,3,2,3,5); rough guess
  Amount was scaled to the amount of reference product.
  EcoSpold01Location=RER
  Uncertainty: rough guess
  properties: dry mass 1 kg, wet mass 1 kg
- lignite: 1.236 kg; = 0.12 * scaling_factor; lognormal variance with pedigree 0.0406
  EcoSpold01Location=RER
  (2,1,1,1,1,1); see power plant data base for details
  Amount was scaled to the amount of reference product.
  Uncertainty: see power plant data base for details
  properties: carbon content, fossil 0.655, dry mass 0.42 kg, heating value, net 8.8 MJ, water content 1.38095, wet mass 1 kg
  note on carbon content, fossil: C content of dry lignite is 58-73% (specified in Tab 1.1, report 6, part VI). A mean content of 0.655 kg C/kg dry lignite was considered.
  note on heating value, net: Based on literature, page 52, Dones R., Bauer C., Bolliger R., Burger B., Faist Emmenegger M., Frischknecht R., Heck T., Jungbluth N., Röder A., Tuchschmid M. (2007) Life Cycle Inventories of Energy Systems: Results for Current Systems in Switzerland and other UCTE Countries. ecoinvent report No. 5. Paul Scherrer Institut Villigen, Swiss Centre for Life Cycle Inventories, Dübendorf, CH.
- lignite ash: -0.12669 kg; name lignite_ash; = 0.0123 * scaling_factor; lognormal variance with pedigree 0.07
  (5,1,1,1,1,1); calculated from mass balance
  Amount was scaled to the amount of reference product.
  EcoSpold01Location=PL
  Uncertainty: calculated from mass balance
  production volume
    Calculated from the electricity production with lignite in proportion to the respective output amounts.
  properties: dry mass 1 kg, heating value, net 21.7 MJ, wet mass 1 kg
  note on heating value, net: Based on literature, page 52, Report 5: Dones, R., Bauer, C., Bolliger, R., Burger, B., faist Emmenegger, M., Frischknecht, R., Heck, T., Jungbluth, N., Röder, A., Tuchschmid, M. (2007) Life Cycle Inventories of Energy Systems: Resulst for current Systems in Switzerland and other UCTE Countries. ecoinvent report No. 5. Paul Scherrer Institut Villigen, Swiss Centre for Life Cycle Inventories, Dübendorf, CH
- lignite power plant: 1.00116e-11 unit; = 9.72E-13 * scaling_factor; lognormal variance with pedigree 0.3527
  EcoSpold01Location=RER
  (3,3,2,3,1,3);
  Amount was scaled to the amount of reference product.
  Uncertainty: ;
- water, completely softened: 0.0618 kg; name water_softened_input; = 0.006 * scaling_factor; lognormal variance with pedigree 0.084025
  (4,5,3,2,3,3); estimate based on literature
  Amount was scaled to the amount of reference product.
  (4,5,3,2,3,3); estimate based on literature
  Amount was scaled to the amount of reference product.
  EcoSpold01Location=RER
  Uncertainty: estimate based on literature
  properties: wet mass 1 kg
- water, decarbonised: 1.545 kg; name water_decarbonised_input; = 0.15 * scaling_factor; lognormal variance with pedigree 0.084025
  EcoSpold01Location=RER
  (4,5,3,2,3,3); estimate based on literature
  Amount was scaled to the amount of reference product.
  (4,5,3,2,3,3); estimate based on literature
  Amount was scaled to the amount of reference product.
  Uncertainty: estimate based on literature
  properties: wet mass 1 kg

## Inputs from nature
- Water, cooling, unspecified natural origin [natural resource, in water]: 0.0537013 m3; name water_cooling_UNO_input; source Scown, C.D., et al. 2011; lognormal variance with pedigree 0.130025
  (4,5,3,2,1,5); estimate based on literature
  Amount was scaled to the amount of reference product.
  Calculated based on literature (Scown, C.D., et al., 2011, Water Footprint of U.S. Trasportation Fuels;Scown, C.D., et al., 2011, Water Footprint of U.S. Trasportation Fuels (SI); Stiegel, 2008, Estimating Freshwater Needs to Meet Future Thermoelectric Generation Requirements; Floerke, M., 2009, Future changes of freshwater needs in the electricity production sector), (Vionnet, S., Quantis Water Database - Technical Report, 2012). Water use in this process is modelled based on literature (see references). The process boundaries are given by the boundaries of the power plant. The process ends when the energy (MJ) is produced and ready to be used for electricity production (kWh). It is assumed that the water use during this process is the same as in case of coal.
  Calculated based on literature data.
  Uncertainty: estimate based on literature

## Emissions to nature
- Antimony ion [air, non-urban air or from high stacks]: 9.2391e-9 kg; = 8.97E-10 * scaling_factor; lognormal variance with pedigree 0.77
  (5,1,1,1,1,5); calculated from trace element balance, input uncertain
  Amount was scaled to the amount of reference product.
  Uncertainty: calculated from trace element balance, input uncertain
- Arsenic ion [air, non-urban air or from high stacks]: 7.0864e-8 kg; = 6.88E-09 * scaling_factor; lognormal variance with pedigree 0.77
  (same comment as for Antimony ion)
- Barium II [air, non-urban air or from high stacks]: 4.5423e-7 kg; = 4.41E-08 * scaling_factor; lognormal variance with pedigree 0.77
  (same comment as for Antimony ion)
- Benzene [air, non-urban air or from high stacks]: 2.2351e-6 kg; = 2.17E-07 * scaling_factor; lognormal variance with pedigree 0.110025
  (3,5,3,2,1,5); based on available literature
  Amount was scaled to the amount of reference product.
  Uncertainty: based on available literature
- Benzo(a)pyrene [air, non-urban air or from high stacks]: 2.06e-12 kg; = 2E-13 * scaling_factor; lognormal variance with pedigree 0.110025
  (same comment as for Benzene)
- Boron [air, non-urban air or from high stacks]: 2.8325e-6 kg; = 2.75E-07 * scaling_factor; lognormal variance with pedigree 0.77
  (same comment as for Antimony ion)
- Bromine [air, non-urban air or from high stacks]: 1.2669e-6 kg; = 1.23E-07 * scaling_factor; lognormal variance with pedigree 0.24
  (same comment as for Antimony ion)
- Butane [air, non-urban air or from high stacks]: 1.957e-7 kg; = 1.9E-08 * scaling_factor; lognormal variance with pedigree 0.110025
  (same comment as for Benzene)
- Cadmium II [air, non-urban air or from high stacks]: 2.2763e-8 kg; = 2.21E-09 * scaling_factor; lognormal variance with pedigree 0.77
  (same comment as for Antimony ion)
- Carbon dioxide, fossil [air, non-urban air or from high stacks]: 1.0815 kg; = 0.105 * scaling_factor; lognormal variance with pedigree 0.042
  (3,1,1,1,1,1); based on available literature
  Amount was scaled to the amount of reference product.
  Uncertainty: based on available literature
- Carbon monoxide, fossil [air, non-urban air or from high stacks]: 0.000206 kg; = 2E-05 * scaling_factor; lognormal variance with pedigree 0.704025
  (3,4,3,2,1,5); based on available literature
  Amount was scaled to the amount of reference product.
  Uncertainty: based on available literature
- Chromium III [air, non-urban air or from high stacks]: 9.0846e-8 kg; = 8.82E-09 * scaling_factor; lognormal variance with pedigree 0.77
  (same comment as for Antimony ion)
- Chromium VI [air, non-urban air or from high stacks]: 1.1227e-8 kg; = 1.09E-09 * scaling_factor; lognormal variance with pedigree 0.52, pedigree (1,1,5,1,1)
  based on range of data
  Amount was scaled to the amount of reference product.
- Cobalt II [air, non-urban air or from high stacks]: 7.9516e-9 kg; = 7.72E-10 * scaling_factor; lognormal variance with pedigree 0.77
  (same comment as for Antimony ion)
- Copper ion [air, non-urban air or from high stacks]: 2.7501e-7 kg; = 2.67E-08 * scaling_factor; lognormal variance with pedigree 0.77
  (same comment as for Antimony ion)
- Dinitrogen monoxide [air, non-urban air or from high stacks]: 5.15e-6 kg; = 5E-07 * scaling_factor; lognormal variance with pedigree 0.104025
  (same comment as for Carbon monoxide, fossil)
- Dioxins, measured as 2,3,7,8-tetrachlorodibenzo-p-dioxin [air, non-urban air or from high stacks]: 7.21e-14 kg; = 7E-15 * scaling_factor; lognormal variance with pedigree 0.370025
  (same comment as for Benzene)
- Ethane [air, non-urban air or from high stacks]: 4.223e-7 kg; = 4.1E-08 * scaling_factor; lognormal variance with pedigree 0.110025
  (same comment as for Benzene)
- Formaldehyde [air, non-urban air or from high stacks]: 5.974e-7 kg; = 5.8E-08 * scaling_factor; lognormal variance with pedigree 0.110025
  (same comment as for Benzene)
- Hydrocarbons, aliphatic, alkanes, unspecified [air, non-urban air or from high stacks]: 2.2557e-6 kg; = 2.19E-07 * scaling_factor; lognormal variance with pedigree 0.110025
  (same comment as for Benzene)
- Hydrocarbons, aliphatic, unsaturated [air, non-urban air or from high stacks]: 2.2248e-6 kg; = 2.16E-07 * scaling_factor; lognormal variance with pedigree 0.110025
  (same comment as for Benzene)
- Hydrochloric acid [air, non-urban air or from high stacks]: 2.1012e-5 kg; = 2.04E-06 * scaling_factor; lognormal variance with pedigree 0.24
  (same comment as for Antimony ion)
- Hydrogen fluoride [air, non-urban air or from high stacks]: 2.1218e-5 kg; = 2.06E-06 * scaling_factor; lognormal variance with pedigree 0.24
  (same comment as for Antimony ion)
- Iodine [air, non-urban air or from high stacks]: 7.828e-7 kg; = 7.6E-08 * scaling_factor; lognormal variance with pedigree 0.24
  (same comment as for Antimony ion)
- Lead II [air, non-urban air or from high stacks]: 6.9731e-8 kg; = 6.77E-09 * scaling_factor; lognormal variance with pedigree 0.77
  (same comment as for Antimony ion)
- Lead-210 [air, non-urban air or from high stacks]: 0.00023278 kBq; = 2.26E-05 * scaling_factor; lognormal variance with pedigree 0.42
  (same comment as for Antimony ion)
- Manganese II [air, non-urban air or from high stacks]: 2.987e-7 kg; = 2.9E-08 * scaling_factor; lognormal variance with pedigree 0.77
  (same comment as for Antimony ion)
- Mercury II [air, non-urban air or from high stacks]: 1.3081e-7 kg; = 1.27E-08 * scaling_factor; lognormal variance with pedigree 0.77
  (same comment as for Antimony ion)
- Methane, fossil [air, non-urban air or from high stacks]: 1.03e-5 kg; = 1E-06 * scaling_factor; lognormal variance with pedigree 0.104025
  (same comment as for Carbon monoxide, fossil)
- Molybdenum VI [air, non-urban air or from high stacks]: 5.1294e-8 kg; = 4.98E-09 * scaling_factor; lognormal variance with pedigree 0.77
  (same comment as for Antimony ion)
- Nickel II [air, non-urban air or from high stacks]: 3.5432e-7 kg; = 3.44E-08 * scaling_factor; lognormal variance with pedigree 0.77
  (same comment as for Antimony ion)
- Nitrogen oxides [air, non-urban air or from high stacks]: 0.0014626 kg; = 0.000142 * scaling_factor; lognormal variance with pedigree 0.082
  (3,1,1,1,1,1); see power plant data base for details
  Amount was scaled to the amount of reference product.
  Uncertainty: see power plant data base for details
- PAH, polycyclic aromatic hydrocarbons [air, non-urban air or from high stacks]: 1.03e-8 kg; = 1E-09 * scaling_factor; lognormal variance with pedigree 0.370025
  (same comment as for Benzene)
- Particulate Matter, < 2.5 um [air, non-urban air or from high stacks]: 0.00033681 kg; = 3.27E-05 * scaling_factor; lognormal variance with pedigree 0.42
  (5,1,1,1,1,5); see power plant data base for details
  Amount was scaled to the amount of reference product.
  Uncertainty: see power plant data base for details
- Particulate Matter, > 10 um [air, non-urban air or from high stacks]: 7.1276e-5 kg; = 6.92E-06 * scaling_factor; lognormal variance with pedigree 0.16
  (same comment as for Particulate Matter, < 2.5 um)
- Particulate Matter, > 2.5 um and < 10um [air, non-urban air or from high stacks]: 3.9655e-5 kg; = 3.85E-06 * scaling_factor; lognormal variance with pedigree 0.24
  (same comment as for Particulate Matter, < 2.5 um)
- Pentane [air, non-urban air or from high stacks]: 1.5141e-6 kg; = 1.47E-07 * scaling_factor; lognormal variance with pedigree 0.110025
  (same comment as for Benzene)
- Polonium-210 [air, non-urban air or from high stacks]: 0.00042436 kBq; = 4.12E-05 * scaling_factor; lognormal variance with pedigree 0.42
  (same comment as for Antimony ion)
- Potassium-40 [air, non-urban air or from high stacks]: 8.5593e-5 kBq; = 8.31E-06 * scaling_factor; lognormal variance with pedigree 0.42
  (same comment as for Antimony ion)
- Propane [air, non-urban air or from high stacks]: 3.605e-7 kg; = 3.5E-08 * scaling_factor; lognormal variance with pedigree 0.110025
  (same comment as for Benzene)
- Propene [air, non-urban air or from high stacks]: 1.648e-7 kg; = 1.6E-08 * scaling_factor; lognormal variance with pedigree 0.110025
  (same comment as for Benzene)
- Radium-226 [air, non-urban air or from high stacks]: 5.9946e-5 kBq; = 5.82E-06 * scaling_factor; lognormal variance with pedigree 0.42
  (same comment as for Antimony ion)
- Radium-228 [air, non-urban air or from high stacks]: 3.8316e-5 kBq; = 3.72E-06 * scaling_factor; lognormal variance with pedigree 0.42
  (same comment as for Antimony ion)
- Radon-220 [air, non-urban air or from high stacks]: 0.0014935 kBq; = 0.000145 * scaling_factor; lognormal variance with pedigree 0.42
  (same comment as for Antimony ion)
- Radon-222 [air, non-urban air or from high stacks]: 0.0026471 kBq; = 0.000257 * scaling_factor; lognormal variance with pedigree 0.42
  (same comment as for Antimony ion)
- Selenium IV [air, non-urban air or from high stacks]: 2.8737e-7 kg; = 2.79E-08 * scaling_factor; lognormal variance with pedigree 0.77
  (same comment as for Antimony ion)
- Strontium [air, non-urban air or from high stacks]: 4.6247e-7 kg; = 4.49E-08 * scaling_factor; lognormal variance with pedigree 0.77
  (same comment as for Antimony ion)
- Sulfur dioxide [air, non-urban air or from high stacks]: 0.0053045 kg; = 0.000515 * scaling_factor; lognormal variance with pedigree 0.042
  (same comment as for Nitrogen oxides)
- Thorium-228 [air, non-urban air or from high stacks]: 2.06e-5 kBq; = 2E-06 * scaling_factor; lognormal variance with pedigree 0.42
  (same comment as for Antimony ion)
- Thorium-232 [air, non-urban air or from high stacks]: 3.2445e-5 kBq; = 3.15E-06 * scaling_factor; lognormal variance with pedigree 0.42
  (same comment as for Antimony ion)
- Toluene [air, non-urban air or from high stacks]: 1.1227e-6 kg; = 1.09E-07 * scaling_factor; lognormal variance with pedigree 0.110025
  (same comment as for Benzene)
- Uranium-238 [air, non-urban air or from high stacks]: 4.9955e-5 kBq; = 4.85E-06 * scaling_factor; lognormal variance with pedigree 0.42
  (same comment as for Antimony ion)
- Vanadium V [air, non-urban air or from high stacks]: 8.5387e-8 kg; = 8.29E-09 * scaling_factor; lognormal variance with pedigree 0.77
  (same comment as for Antimony ion)
- Water [air, unspecified]: 0.00139636 m3; name water_to_air_unspecified; = (water_softened_input/1000)*fraction_WCS_to_air+(water_decarbonised_input/1000)*fraction_WDC_to_air+water_cooling_UNO_input*fraction_CW_to_air; lognormal variance with pedigree 0.130025, pedigree (4,4,5,2,4)
  Calculated value based on literature values and expert opinion. See comments in the parametres' comment field.
  property fraction, origin: fresh water 0.0344187; name fraction_origin_fresh_water
  property fraction, origin: salt water 0; name fraction_origin_salt_water
  property fraction, origin: unspecified 0.965581; name fraction_origin_unspecified
- Xylene [air, non-urban air or from high stacks]: 9.4966e-6 kg; = 9.22E-07 * scaling_factor; lognormal variance with pedigree 0.110025
  (same comment as for Benzene)
- Zinc II [air, non-urban air or from high stacks]: 5.3148e-7 kg; = 5.16E-08 * scaling_factor; lognormal variance with pedigree 0.77
  (same comment as for Antimony ion)
- Water [water, unspecified]: 0.0539117 m3; name water_to_water_unspecified; = (water_softened_input/1000)*(1-fraction_WCS_to_air)+(water_decarbonised_input/1000)*(1-fraction_WDC_to_air)+water_cooling_UNO_input*(1-fraction_CW_to_air); lognormal variance with pedigree 0.130025, pedigree (4,4,5,2,4)
  (same comment as for Water)
  property carbon content, fossil 0; name C_content_fossil
  property carbon content, non-fossil 0; name C_content_non_fossil
  property fraction, origin: fresh water 0.0289128; name fraction_origin_fresh_water_Ww
  property fraction, origin: salt water 0; name fraction_origin_salt_water_Ww
  property fraction, origin: unspecified 0.971087; name fraction_origin_unspecified_Ww
  property water in wet mass 1000 kg; name WWM

## Sampling procedure
literature and statistics

## Extrapolations
The Annual Production Volume is valid for the year 2008. Uncertainty has been adjusted accordingly.

## Review by Christian Bauer 2009-02-03
passed

## Review by Bo Weidema 2013-01-10
added tag for "lignite power"
