# treatment of wastewater from liquid crystal display production, wastewater treatment

Dataset: EcoSpold 2, unit process
Geography: CH
Time period: 2010-01-01 to 2022-12-31
Technology level: current
Classification: ISIC rev.4 ecoinvent: 3700:Sewerage
Scenario: Business-as-Usual
System model: Allocation at the point of substitution
Generated by: Nikolia Stoikou
Database: ecoinvent
isCopyrightProtected: true

## General comment
This dataset represents the treatment of a wastewater, generated from an ordinary transforming activity. Purification in wastewater treatment of 'wastewater from liquid crystal display production'. Recommended use of this dataset: to be used for wastewaters, generated from ordinary transforming activities, of equal or similar composition. The wastewater has a content of TOC: 1.531 kg/m3, COD: 5.96881 kg/m3 and BOD: 2.88683 kg/m3. TOC is equal to C present in the wastewater, COD is calculated as TOC/0.2565 and BOD is calculated as COD/0.53034. Detailed elemental composition can be found in the properties of the wastewater treated. Share of biogenic carbon in the sludge: 0%.

## Included activities start
The activity starts with the wastewater being available at the gate of the treatment facility. Collection and transportation of the wastewater to the treatment plant is not included.

## Included activities end
The activity ends with the wastewater being treated and waste-specific emissions released to the environment. Expenditures from treatment of wastewater in waste treatment plant are included as well as relevant infrastructure of the plant. Emissions from any sludge digestion, biogas generation and utilization (heeding specific wastewater composition) are also included. Waste-specific direct emissions of untreated wastewater and required territory-specific infrastructure for sewers are not contained within this dataset but instead in the regional market datasets for this wastewater.

## Geography
The site has mean annual temperature (MAT) of 9.5 degC, mean annual precipitation (MAP) of 1483.00559816076 mm/year, mean annual actual evaporation (EAT) of 528.63778611689 mm/year. In the WWT plant, 0% of its water input are lost due to evaporation from pools, 0.0821% of water is *gained* from organic mass degradation, and 0.237% is removed off site via sludge disposal. (References: UN data, 2020. Precipitation, Environment Statistics Database, United Nations Statistics Division Available at: http://data.un.org/Data.aspx?q=precipitation&d=ENV&f=variableID%3a6; World Bank, 2022. Surface area (sq.km), World Bank Group Available at: https://data.worldbank.org/indicator/AG.SRF.TOTL.K2; MeteoSwiss, 2022. Data on Swiss temperature mean, Federal Department of Home Affairs FDHA. Federal Office of Meteorology and Climatology. Swiss Climate Available at: https://www.MeteoSwiss.admin.ch/home/climate/swiss-climate-in-detail/Swiss-temperature-mean/Data-on-the-Swiss-temperature-mean.html?query=TEMPERATURE+DATA&topic=/content/MeteoSwiss/tags/topics/klima&pageIndex=0&tab=search_tab; Doka G.,2021. A model for composition-specific life cycle inventories of regionalised wastewater fates, Zurich, Switzerland. http://www.doka.ch/publications.htm)

## Technology
This activity represents the treatment of a specific wastewater in a WWT plant (while direct emissions and sewering are heeded in the upstream market dataset for this wastewater). The size of the treatment plant infrastructure is for a national average territory situation. The assumed size of the WWTP treats 90.6 Mio m3 per year. The mixture of WWTP with one, two, or three stages is 0%-11.2%-88.8%. The actual, waste-specific oxygen requirement in the biological stages is 2.641kg O. Generated waste-specific raw sludge is treated with anaerobic digestion. The digestion process produces 1414 litres of biogas with an energy content of 28.94MJ. 23.6% of the biogas is utilized for energy. The remainder is flared. The gross electric efficiency is 26.564%. The gross thermal efficiency is 47.853%. After digestion, the remaining total sludge mass (dry matter) is 1.467kg DM.

## Reference product
- iron scrap, sorted, pressed: 1 kg; By-product classification Recyclable; CPC 39310: Slag, dross, scalings and other waste from the manufacture of iron or steel; lognormal variance with pedigree 0.3109, pedigree (1,1,1,1,1)
  scrap output from used infrastructure for wastewater treatment plant.
  Uncertainty: Uncertainty calculated from wastewater technosphere fate uncertainty and treatment infrastructure uncertainty.
  production volume 1.22818e-6 kg
    Calculated in proportion to wastewater reference product.
  property price 0.175 EUR2005
    Temporary price data. Calculated as 90% of purchasers price based on: 2005 import and export prices (total trades (USD) divided by total weight (kg) in biggest economies of the world: EU27, USA, Brasil, China, India, Japan and Russia) from UN Commodity Trade Statistics Database (http://data.un.org/Explorer.aspxDatabase [Accessed 2011.06.20]). Commodity: Waste or scrap, of cast iron
  properties: carbon allocation 0 kg, carbon content 0, carbon content, fossil 0, carbon content, non-fossil 0, dry mass 1 kg, water content 0, water in wet mass 0 kg, wet mass 1 kg

## Inputs from technosphere
- N-methyl-2-pyrrolidone: 3.25299e-6 kg
- acetic acid, without water, in 98% solution state: 2.70187e-5 kg
- acetone, liquid: 1.02714e-5, 3.32111e-5 kg (2 suppliers, which the file names only by identifier); sum of these 4.34825e-5 kg
- aluminium sulfate, powder: 0.000366142, 7.71291e-5 kg (2 suppliers, which the file names only by identifier); sum of these 0.000443271 kg
- ammonia, anhydrous, liquid: 6.00031e-6, 6.28897e-7, 1.32794e-5, 6.12441e-6, 2.31131e-5, 3.09102e-6, 2.8114e-6, 6.65095e-5, 1.98685e-6 kg (9 suppliers, which the file names only by identifier); sum of these 0.000123545 kg
- argon, crude, liquid: 3.32242e-5 kg
- carbon dioxide, liquid: 1.30431e-7, 2.74562e-8 kg (2 suppliers, which the file names only by identifier); sum of these 1.57888e-7 kg
- chemical, organic: 0.00254477 kg
- chlorine, liquid: 5.45276e-5, 1.09076e-5 kg (2 suppliers, which the file names only by identifier); sum of these 6.54352e-5 kg
- cyclohexanol: 5.73674e-8, 2.83314e-8 kg (2 suppliers, which the file names only by identifier); sum of these 8.56988e-8 kg
- dimethyl sulfoxide: 0.000279897 kg
- electricity, medium voltage: 0.303723 kWh
- electronic component factory: 3.07669e-10 unit
- ethanol, without water, in 99.7% solution state, from ethylene: 1.76624e-5, 3.93287e-5 kg (2 suppliers, which the file names only by identifier); sum of these 5.69911e-5 kg
- ethylene glycol: 3.25299e-6 kg
- glass fibre: 5.88094e-9 kg
- heat, district or industrial, natural gas: 0.779678 MJ
- heat, district or industrial, other than natural gas: 0.196379 MJ
- hydrochloric acid, without water, in 30% solution state: 3.32157e-5, 0.000148735 kg (2 suppliers, which the file names only by identifier); sum of these 0.000181951 kg
- hydrogen fluoride: 4.51823e-6, 1.32554e-5 kg (2 suppliers, which the file names only by identifier); sum of these 1.77736e-5 kg
- hydrogen peroxide, without water, in 50% solution state: 5.12591e-7, 1.07979e-7 kg (2 suppliers, which the file names only by identifier); sum of these 6.2057e-7 kg
- hydrogen, liquid: 0.000336124, 0.00153818 kg (2 suppliers, which the file names only by identifier); sum of these 0.00187431 kg
- isopropanol: 0.00121697, 0.000256359 kg (2 suppliers, which the file names only by identifier); sum of these 0.00147333 kg
- krypton, gaseous: 1.08918e-7 kg
- lime, hydrated, packed: 0.000581863, 4.93905e-6 kg (2 suppliers, which the file names only by identifier); sum of these 0.000586802 kg
- methyl ethyl ketone: 2.25282e-8, 8.50107e-9 kg (2 suppliers, which the file names only by identifier); sum of these 3.10293e-8 kg
- nitric acid, without water, in 50% solution state: 1.13253e-6, 1.47334e-5, 1.68277e-6, 4.18474e-6, 5.44212e-6, 2.0051e-6, 6.89627e-6, 1.81808e-6, 1.67654e-6, 1.27767e-5 kg (10 suppliers, which the file names only by identifier); sum of these 5.23482e-5 kg
- nitrogen, liquid: 0.0195435, 0.00536455 kg (2 suppliers, which the file names only by identifier); sum of these 0.024908 kg
- oxygen, liquid: 7.04427e-6, 2.56726e-5 kg (2 suppliers, which the file names only by identifier); sum of these 3.27169e-5 kg
- phosphoric acid, industrial grade, without water, in 85% solution state: 0.000166746 kg
- polarizer, liquid crystals and colour filters, for liquid crystal display: 0.000336513 kg
- polycarbonate: 3.89386e-6 kg
- printed wiring board mounting facility: 6.72298e-10 unit
- propylene glycol, liquid: 5.66892e-5, 2.79964e-5 kg (2 suppliers, which the file names only by identifier); sum of these 8.46856e-5 kg
- refinery sludge: -1.2207e-5, -0.000117682, -5.58553e-7 kg (3 suppliers, which the file names only by identifier); sum of these -0.000130448 kg
- sludge, NaCl electrolysis: -0.000241899 kg
- sodium hydroxide, without water, in 50% solution state: 0.00151556 kg
- sodium phosphate: 0.000612173, 0.000128956 kg (2 suppliers, which the file names only by identifier); sum of these 0.000741129 kg
- spent solvent mixture: -0.0101088, -9.25387e-5, -0.00394984 kg (3 suppliers, which the file names only by identifier); sum of these -0.0141511 kg
- sulfuric acid: 0.0008549, 0.000111839 kg (2 suppliers, which the file names only by identifier); sum of these 0.000966739 kg
- toluene diisocyanate: 1.04152e-7, 1.92361e-8 kg (2 suppliers, which the file names only by identifier); sum of these 1.23388e-7 kg
- used printed wiring boards: -3.2322e-6 kg
- waste glass: -5.69008e-6, -1.36297e-5, -0.000147879, -1.27163e-6, -0.000280901, -1.93104e-6, -0.00139363, -3.09212e-7 kg (8 suppliers, which the file names only by identifier); sum of these -0.00184525 kg
- waste mineral oil: -4.61859e-7, -4.88491e-5, -1.86564e-5 kg (3 suppliers, which the file names only by identifier); sum of these -6.79674e-5 kg
- waste plastic, consumer electronics: -0.00319813, -4.83155e-5 kg (2 suppliers, which the file names only by identifier); sum of these -0.00324644 kg
- wastewater from liquid crystal display production: -2.91548e-5, -0.00602886 m3 (2 suppliers, which the file names only by identifier); sum of these -0.00605801 m3
- xylene: 5.61426e-6, 1.01359e-6 kg (2 suppliers, which the file names only by identifier); sum of these 6.62784e-6 kg

## Inputs from nature
- Water, unspecified natural origin [natural resource, in water]: 0.00605801 m3

## Emissions to nature
- Acetic acid [air, urban air close to ground]: 5.74141e-6 kg
- Acetone [air, urban air close to ground]: 7.85208e-7 kg
- Ammonia [air, urban air close to ground]: 0.000263006 kg
- Boric acid [air, urban air close to ground]: 5.78356e-9 kg
- Boron trifluoride [air, urban air close to ground]: 3.87538e-5 kg
- Cyclohexane [air, urban air close to ground]: 2.04744e-7 kg
- Diethylene glycol [air, urban air close to ground]: 4.09066e-7 kg
- Hydrochloric acid [air, urban air close to ground]: 0.000255824 kg
- Hydrogen [air, urban air close to ground]: 5.61465e-7 kg
- Hydrogen fluoride [air, urban air close to ground]: 0.000219949 kg
- NMVOC, non-methane volatile organic compounds [air, urban air close to ground]: 0.000450873 kg
- Nitrogen fluoride [air, urban air close to ground]: 1.13186e-7 kg
- Nitrogen oxides [air, urban air close to ground]: 1.13561e-6 kg
- Phosphine [air, urban air close to ground]: 0.00026427 kg
- Phosphoric acid [air, urban air close to ground]: 2.04744e-7 kg
- Sodium tetrahydridoborate [air, urban air close to ground]: 7.51441e-5 kg
- Sulfur hexafluoride [air, urban air close to ground]: 4.52673e-7 kg
- Tetramethyl ammonium hydroxide [air, urban air close to ground]: 0.00271452 kg
- Antimony ion [water, surface water]: 4.81269e-10 kg
- Arsenic ion [water, surface water]: 4.81269e-10 kg
- BOD5, Biological Oxygen Demand [water, surface water]: 7.34549e-5 kg
- Boron [water, surface water]: 1.93347e-8 kg
- COD, Chemical Oxygen Demand [water, surface water]: 1.13139e-5 kg
- Cadmium II [water, surface water]: 4.81269e-10 kg
- Chromium III [water, surface water]: 3.73191e-8 kg
- Chromium VI [water, surface water]: 9.66739e-10 kg
- Copper ion [water, surface water]: 3.87538e-9 kg
- Cyanide [water, surface water]: 1.54511e-8 kg
- DOC, Dissolved Organic Carbon [water, surface water]: 4.19034e-6 kg
- Ethane, 1,1,1-trichloro-, HCFC-140 [water, surface water]: 9.66739e-11 kg
- Fluoride [water, surface water]: 5.40358e-5 kg
- Hydrocarbons, aromatic [water, surface water]: 2.48222e-6 kg
- Iron ion [water, surface water]: 1.11028e-8 kg
- Lead II [water, surface water]: 2.60476e-8 kg
- Manganese II [water, surface water]: 9.66739e-10 kg
- Mercury II [water, surface water]: 4.09066e-10 kg
- Nickel II [water, surface water]: 9.66739e-10 kg
- Nitrogen [water, surface water]: 0.000334772 kg
- Oils, unspecified [water, surface water]: 8.5276e-7 kg
- Phenol [water, surface water]: 9.66739e-10 kg
- Phosphate [water, surface water]: 9.66739e-10 kg
- Phosphorus [water, surface water]: 1.81951e-5 kg
- Solids, inorganic [water, surface water]: 3.18723e-5 kg
- TOC, Total Organic Carbon [water, surface water]: 4.19034e-6 kg
