# treatment of scrap tin sheet, sanitary landfill

Dataset: EcoSpold 2, unit process
Geography: CH
Time period: 1994-01-01 to 2022-12-31
Technology level: current
Classification: EcoSpold01Categories: waste management/sanitary landfill
Classification: ISIC rev.4 ecoinvent: 3821:Treatment and disposal of non-hazardous waste
Tags: ConvertedDataset; Treatment
Scenario: Business-as-Usual
System model: Allocation at the point of substitution
Generated by: Gabor Doka (obsolete)
Published in: Doka G. 2007
Database: ecoinvent
isCopyrightProtected: true

## General comment
Inventoried waste contains 99.8% tin sheet inert; 0.195% tin volatile; .
waste composition (wet, in ppm): H2O n.a.; O n.a.; H n.a.; C n.a.; S n.a.; N n.a.; P n.a.; B n.a.; Cl 750; Br n.a.; F n.a.; I n.a.; Ag n.a.; As n.a.; Ba n.a.; Cd 30; Co n.a.; Cr n.a.; Cu 199; Hg n.a.; Mn n.a.; Mo n.a.; Ni n.a.; Pb 380; Sb n.a.; Se n.a.; Sn 3900; V n.a.; Zn 202; Be n.a.; Sc n.a.; Sr n.a.; Ti n.a.; Tl n.a.; W n.a.; Si n.a.; Fe 994570; Ca n.a.; Al n.a.; K n.a.; Mg n.a.; Na n.a.;
Share of carbon in waste that is biogenic 60.4%.
Overall degradability of waste during 100 years: 50%.
[This dataset was already contained in the ecoinvent database version 2. It was not individually updated during the transfer to ecoinvent version 3. Life Cycle Impact Assessment results may still have changed, as they are affected by changes in the supply chain, i.e. in other datasets. This dataset was generated following the ecoinvent quality guidelines for version 2. It may have been subject to central changes described in the ecoinvent version 3 change report (http://www.ecoinvent.org/database/ecoinvent-version-3/reports-of-changes/), and the results of the central updates were reviewed extensively. The changes added e.g. consistent water flows and other information throughout the database. The documentation of this dataset can be found in the ecoinvent reports of version 2, which are still available via the ecoinvent website. The change report linked above covers all central changes that were made during the conversion process.]

## Included activities end
Waste-specific short-term emissions to air via landfill gas incineration and landfill leachate. Burdens from treatment of short-term leachate (0-100a) in wastewater treatment plant (including WWTP sludge disposal in municipal incinerator). Long-term emissions from landfill to groundwater (after base lining failure).

## Geography
Technology encountered in Switzerland in 2000. Landfill includes base seal, leachate collection system, treatment of leachate in municipal wastewater treatment plant.

## Technology
Swiss municipal sanitary landfill for biogenic or untreated municipal waste ('reactive organic landfill'). Landfill gas and leachate collection system. Recultivation and monitoring for 150 years after closure.

## Reference product
- scrap tin sheet: -1 kg; By-product classification Waste; CPC 39366: Waste and scrap of tin
  production volume 50 kg
    estimated proportion; value to be replaced by value to be calculated from the demand for this treatment activity
  property price 0 EUR2005
    Waste products are assigned a price of zero as they are assumed to require further treatment.
  properties: carbon allocation 0 kg, carbon content 0, carbon content, fossil 0, carbon content, non-fossil 0, dry mass 1 kg, water content 0, water in wet mass 0 kg, wet mass 1 kg

## Inputs from technosphere
- cement, unspecified: 0.000197 kg; lognormal variance with pedigree 0.47, pedigree (1,1,5,1,1)
  burden from incineration of sludge from wastewater treatment of the short-term leachate (0-100a). uncertainty is calculated from uncertainties in waste composition and transfer coefficients in incinerator and uncertainty of waste decomposition and short-term leaching in sanitary landfill
  properties: dry mass 1 kg, wet mass 1 kg
- chemical, inorganic: 8.04e-8 kg; lognormal variance with pedigree 0.43, pedigree (1,1,5,1,1)
  (same comment as for cement, unspecified)
  properties: carbon content, fossil 0.003, dry mass 1 kg, wet mass 1 kg
  note on carbon content, fossil: This dataset is an unweighted average of 20 inorganic substances (listed in Tab 88.1, ecoinvent v2.2 report 8, part II), being part of the top100 chemicals included in this database. The C-content has also been calculated as an unweighted average of the C content of the substances composing this dataset.
- chemical, organic: 4.04e-6 kg; lognormal variance with pedigree 1.32, pedigree (1,1,5,1,1)
  (same comment as for cement, unspecified)
  properties: carbon content, fossil 0.628, dry mass 1 kg, heating value, net 19.03 MJ, wet mass 1 kg
  note on carbon content, fossil: This dataset is an unweighted average of 20 organic substances (listed in Tab 88.1, ecoinvent v2.2 report 8, part II), being part of the top100 chemicals included in this database. The C-content has also been calculated as an unweighted average of the C content of the substances composing this dataset.
- electricity, for reuse in municipal waste incineration only: 0.00138 kWh; name E_el_prod_MSWI; lognormal variance with pedigree 0.89, pedigree (1,1,5,1,1)
  (same comment as for cement, unspecified)
- electricity, low voltage: 0.00158 kWh; lognormal variance with pedigree 0.61, pedigree (5,5,5,5,5)
  burden from wastewater treatment of the short-term leachate (0-100a). Uncertainty calculated from unertainty of the waste composition of this waste, uncertainty in waste decomposition and short-term leaching in sanitary landfill
- heat, central or small-scale, other than natural gas: 0.003196 MJ; lognormal variance with pedigree 0.63, pedigree (5,5,5,5,5)
  (same comment as for electricity, low voltage)
  properties: heating value, net 1 MJ
- heat, district or industrial, natural gas: 0.0044064 MJ; lognormal variance with pedigree 0.63, pedigree (5,5,5,5,5)
  (same comment as for electricity, low voltage)
  properties: heating value, net 1 MJ
- heat, for reuse in municipal waste incineration only: 0.00803 MJ; name E_th_prod_MSWI; lognormal variance with pedigree 0.45, pedigree (1,1,5,1,1)
  (same comment as for cement, unspecified)
- hydrochloric acid, without water, in 30% solution state: 4.82e-8 kg; lognormal variance with pedigree 0.43, pedigree (1,1,5,1,1)
  (same comment as for cement, unspecified)
  properties: dry mass 1 kg, heating value, net 3.32 MJ, wet mass 1 kg
- iron (III) chloride, without water, in 40% solution state: 9.94e-7 kg; lognormal variance with pedigree 0.69, pedigree (1,1,5,1,1)
  (same comment as for cement, unspecified)
  properties: dry mass 1 kg, wet mass 1 kg
- municipal waste incineration facility: 2.4e-12 unit; lognormal variance with pedigree 0.45, pedigree (1,1,5,1,1)
  Burden from incineration of sludge from wastewater treatment of the short-term leachate (0-100a).
  Burden from incineration of sludge from wastewater treatment of the short-term leachate (0-100a).
- process-specific burdens, municipal waste incineration: 0.00958 kg; lognormal variance with pedigree 0.45, pedigree (1,1,5,1,1)
  Burden from incineration of sludge from wastewater treatment of the short-term leachate (0-100a).
  Burden from incineration of sludge from wastewater treatment of the short-term leachate (0-100a).;activityLink introduced to establish a direct link to the corresponding regional supply of this product
- process-specific burdens, residual material landfill: 0.000493 kg; lognormal variance with pedigree 0.46, pedigree (1,1,5,1,1)
  burden from incineration of sludge from wastewater treatment of the short-term leachate (0-100a). uncertainty is calculated from uncertainties in waste composition and transfer coefficients in incinerator and uncertainty of waste decomposition and short-term leaching in sanitary landfill;activityLink introduced to establish a direct link to the corresponding regional supply of this product
- process-specific burdens, sanitary landfill: 1 kg; lognormal variance with pedigree 0.04, pedigree (1,1,5,1,1)
  demands per kilogram waste. uncertainty is heeded in the module;activityLink introduced to establish a direct link to the corresponding regional supply of this product
- process-specific burdens, slag landfill: 0.00429 kg; lognormal variance with pedigree 0.48, pedigree (1,1,5,1,1)
  (same comment as for process-specific burdens, residual material landfill)
- residual material landfill: 1.03e-12 unit; lognormal variance with pedigree 0.46, pedigree (1,1,5,1,1)
  (same comment as for cement, unspecified)
- sanitary landfill facility: 5.56e-10 unit; lognormal variance with pedigree 0.04, pedigree (1,1,5,1,1)
  demands per kilogram waste. uncertainty is heeded in the module
  This exchange has an activity link directly to the producing activity because the product is primarily consumed in the same geographical area where it is produced.
- sewer grid, 5E9l/year, 110 km: 5.45e-10 km; lognormal variance with pedigree 0.2106, pedigree (5,5,5,5,5)
  (same comment as for electricity, low voltage)
- slag landfill: 7.62e-12 unit; lognormal variance with pedigree 0.48, pedigree (1,1,5,1,1)
  (same comment as for cement, unspecified)
- waste cement, hydrated: -0.000493 kg; lognormal variance with pedigree 0.43, pedigree (1,1,1,1,1)
  (same comment as for cement, unspecified)
  production volume
    Calculated from the production volume of scrap tin sheet, 0% water in proportion to the respective output amounts.
  properties: dry mass 1 kg, wet mass 1 kg
- waste graphical paper: -3.88e-5 kg; lognormal variance with pedigree 0.2106, pedigree (5,5,5,5,5)
  (same comment as for electricity, low voltage)
  production volume
    (same comment as for waste cement, hydrated)
  properties: carbon content, non-fossil 0.454955, dry mass 0.888 kg, heating value, net 14.12 MJ, water content 0.126126, wet mass 1 kg
  note on heating value, net: Value taken from the general comment of the treatment dataset.
- waste plastic, mixture: -3.88e-5 kg; lognormal variance with pedigree 0.2106, pedigree (5,5,5,5,5)
  (same comment as for electricity, low voltage)
  production volume
    (same comment as for waste cement, hydrated)
  properties: carbon content, fossil 0.747344, dry mass 0.847 kg, heating value, net 30.79 MJ, water content 0.180638, wet mass 1 kg
  note on carbon content, fossil: C content in 1 kg DM was calculated using data in Tab A.2, ecoinvent v2.2 report 13_I
- wastewater treatment facility, capacity 5E9l/year: 1.42e-11 unit; lognormal variance with pedigree 0.2106, pedigree (5,5,5,5,5)
  (same comment as for electricity, low voltage)

## Emissions to nature
- Cadmium II [air, non-urban air or from high stacks]: 1.76e-8 kg; lognormal variance with pedigree 1.88, pedigree (1,1,5,1,1)
  burden from direct release or incineration of landfill biogas. Uncertainty calculated from unertainty of the waste composition of this waste, uncertainty in waste decomposition and short-term leaching in sanitary landfill
- Cadmium II [air, urban air close to ground]: 7.22e-11 kg; lognormal variance with pedigree 1.35, pedigree (1,1,5,1,1)
  Emissions from short-term leachate treatment and incineration of resulting sludge. Uncertainty calculated depending on waste input and uncertainty of transfer coefficents in landfill, wastewater treatment and incineration model.
- Carbon monoxide, fossil [air, urban air close to ground]: 2.14e-6 kg; lognormal variance with pedigree 1.09, pedigree (1,1,5,1,1)
  (same comment as for Cadmium II)
- Copper ion [air, non-urban air or from high stacks]: 1.39e-10 kg; lognormal variance with pedigree 2.52, pedigree (1,1,5,1,1)
  (same comment as for Cadmium II)
- Copper ion [air, urban air close to ground]: 2.66e-12 kg; lognormal variance with pedigree 1.52, pedigree (1,1,5,1,1)
  (same comment as for Cadmium II)
- Hydrochloric acid [air, non-urban air or from high stacks]: 1.07e-5 kg; lognormal variance with pedigree 1.06, pedigree (1,1,5,1,1)
  (same comment as for Cadmium II)
- Iron ion [air, non-urban air or from high stacks]: 1.71e-6 kg; lognormal variance with pedigree 1.53, pedigree (1,1,5,1,1)
  (same comment as for Cadmium II)
- Iron ion [air, urban air close to ground]: 1.12e-7 kg; lognormal variance with pedigree 0.51, pedigree (1,1,5,1,1)
  (same comment as for Cadmium II)
- Lead II [air, non-urban air or from high stacks]: 3.73e-10 kg; lognormal variance with pedigree 2.39, pedigree (1,1,5,1,1)
  (same comment as for Cadmium II)
- Lead II [air, urban air close to ground]: 3.7e-11 kg; lognormal variance with pedigree 1.4, pedigree (1,1,5,1,1)
  (same comment as for Cadmium II)
- Methane, fossil [air, urban air close to ground]: 6.11e-8 kg; lognormal variance with pedigree 0.5, pedigree (1,1,5,1,1)
  (same comment as for Cadmium II)
- Tin ion [air, non-urban air or from high stacks]: 2.87e-9 kg; lognormal variance with pedigree 2.12, pedigree (1,1,5,1,1)
  (same comment as for Cadmium II)
- Tin ion [air, urban air close to ground]: 8.87e-9 kg; lognormal variance with pedigree 1.08, pedigree (1,1,5,1,1)
  (same comment as for Cadmium II)
- Zinc II [air, non-urban air or from high stacks]: 1.06e-9 kg; lognormal variance with pedigree 2.25, pedigree (1,1,5,1,1)
  (same comment as for Cadmium II)
- Zinc II [air, urban air close to ground]: 5.4e-11 kg; lognormal variance with pedigree 1.24, pedigree (1,1,5,1,1)
  (same comment as for Cadmium II)
- Cadmium II [water, ground-, long-term]: 2.74e-5 kg; lognormal variance with pedigree 1.22, pedigree (1,1,5,1,1)
  Emissions from long-term leachate (>100a) directly from MSW landfill and indirectly via incineration of treatement sludge from leachate treatement. Uncertainty calculated depending on waste input and uncertainty of long-term transfer coefficents in landfill.
- Cadmium II [water, surface water]: 1.34e-6 kg; lognormal variance with pedigree 1.29, pedigree (1,1,5,1,1)
  (same comment as for Cadmium II)
- Chloride [water, ground-, long-term]: 7.5e-13 kg; lognormal variance with pedigree 2.66, pedigree (1,1,5,1,1)
  (same comment as for Cadmium II)
- Chloride [water, surface water]: 0.00074 kg; lognormal variance with pedigree 0.74, pedigree (1,1,5,1,1)
  Emissions from short-term leachate treatment. Uncertainty calculated depending on waste input and uncertainty of transfer coefficents in landfill and wastewater treatment.
- Copper ion [water, ground-, long-term]: 0.000199 kg; lognormal variance with pedigree 0.91, pedigree (1,1,5,1,1)
  (same comment as for Cadmium II)
- Copper ion [water, surface water]: 1.26e-7 kg; lognormal variance with pedigree 1.46, pedigree (1,1,5,1,1)
  (same comment as for Cadmium II)
- Iron ion [water, ground-, long-term]: 0.0708 kg; lognormal variance with pedigree 1.78, pedigree (1,1,5,1,1)
  (same comment as for Cadmium II)
- Iron ion [water, surface water]: 0.00347 kg; lognormal variance with pedigree 0.45, pedigree (1,1,5,1,1)
  (same comment as for Cadmium II)
- Lead II [water, ground-, long-term]: 0.000379 kg; lognormal variance with pedigree 0.84, pedigree (1,1,5,1,1)
  (same comment as for Cadmium II)
- Lead II [water, surface water]: 1.23e-7 kg; lognormal variance with pedigree 1.34, pedigree (1,1,5,1,1)
  (same comment as for Cadmium II)
- Tin ion [water, ground-, long-term]: 0.00389 kg; lognormal variance with pedigree 0.52, pedigree (1,1,5,1,1)
  (same comment as for Cadmium II)
- Tin ion [water, surface water]: 4.81e-6 kg; lognormal variance with pedigree 1.04, pedigree (1,1,5,1,1)
  (same comment as for Cadmium II)
- Zinc II [water, ground-, long-term]: 0.000163 kg; lognormal variance with pedigree 0.92, pedigree (1,1,5,1,1)
  (same comment as for Cadmium II)
- Zinc II [water, surface water]: 1.48e-6 kg; lognormal variance with pedigree 1.17, pedigree (1,1,5,1,1)
  (same comment as for Cadmium II)

## Sampling procedure
Landfill model based on observed leachate concentrations in literature. Extrapolated to 60'000 years heeding chemical characteristics. Initial waste composition from various literature sources.

## Review by Niels Jungbluth 2003-08-30
Passed. Calculation for standard deviation 95 of, i.e., infrastructure,
land occupation, transport services or other services can differ from
standard Pedigree approach used in this project and figures obtained by
this procedure.
