# diesel, low-sulfur, import from Europe

Dataset: EcoSpold 2, unit process
Geography: CH
Time period: 2005-01-01 to 2022-12-31
Technology level: current
Classification: ISIC rev.4 ecoinvent: 1920:Manufacture of refined petroleum products
Scenario: Business-as-Usual
System model: Allocation at the point of substitution
Generated by: Carl Vadenbo
Database: ecoinvent
isCopyrightProtected: false

## General comment
This dataset represents the import of a refined petroleum product (assuming all diesel to be low-sulfur as required by regulation) from Europe (without Switzerland) into Switzerland.

## Included activities start
This activity starts with the supply of the finished petroleum product from petroleum refinery operation in Europe without Switzerland.

## Included activities end
This activity covers the transport requirements for import of the finished petroleum product to Switzerland.

## Geography
Switzerland

## Reference product
- diesel, low-sulfur: 1 kg; name RP_amount; By-product classification allocatable product; CPC 33360: Gas oil; CAS 68476-34-6
  production volume 1.137e9 kg
    Schweizerische Gesamtenergiestatistik 2005.Table 21. From http://www.bfe.admin.ch/themen/00526/00541/00542/00631/index.html?lang=en&dossier_id=00763
  property price 0.4 EUR2005
    Assumed the same price as diesel, at refinery. According to the International Energy Agency (http://wds.iea.org/WDS/TableViewer/tableView.aspx downloaded 4 July 2009 for purchased data points). The prices are for Germany and excl. taxes, and they are the same for both industry and household. Applying diesel density of 0.844 kg/litre from IEA, Oil information, Documentation for beyond 2020 files.
  properties: carbon allocation 0.865 kg, carbon content 0.865, carbon content, fossil 0.865, carbon content, non-fossil 0, dry mass 1 kg, heating value, net 42.8 MJ, water content 0, water in wet mass 0 kg, wet mass 1 kg

## Inputs from technosphere
- diesel, low-sulfur: 1 kg
  A direct link is set to petroleum refinery operation in Europe without Switzerland for consistency with modelling found in v2.2.
  properties: carbon content, fossil 0.865, dry mass 1 kg, heating value, net 42.8 MJ, wet mass 1 kg
- transport, freight train: 0.224 metric ton*km; source Jungbluth, N. 2007; lognormal variance with pedigree 0.16, pedigree (1,1,5,1,1)
  Amount based on transport requirements (in year 2000) stated for import from Europe to Switzerland from ecoinvent Report No. 6 (Jungbluth 2007), table 10.16.
- transport, freight, inland waterways, barge tanker: 0.396 metric ton*km; source Jungbluth, N. 2007; lognormal variance with pedigree 0.16, pedigree (1,1,5,1,1)
  (same comment as for transport, freight train)
- transport, freight, lorry, unspecified: 0.1 metric ton*km; source Jungbluth, N. 2007; lognormal variance with pedigree 0.16, pedigree (1,1,5,1,1)
  (same comment as for transport, freight train)
- transport, pipeline, onshore, petroleum: 0.08 metric ton*km; source Jungbluth, N. 2007; lognormal variance with pedigree 0.16, pedigree (1,1,5,1,1)
  (same comment as for transport, freight train)
