# treatment of waste mineral oil, hazardous waste incineration, with energy recovery

Dataset: EcoSpold 2, unit process
Geography: CH
Time period: 1997-01-01 to 2022-12-31
Technology level: current
Classification: ISIC rev.4 ecoinvent: 3822:Treatment and disposal of hazardous waste
Tags: Treatment; ConvertedDataset
Scenario: Business-as-Usual
System model: Allocation at the point of substitution
Share of production covered: 39 %
Generated by: Gabor Doka (obsolete)
Published in: Doka G. 2008
Database: ecoinvent
isCopyrightProtected: true

## General comment
Inventoried waste contains 100% waste oil; . waste composition (wet, in ppm): upper heating value 41.8 MJ/kg; lower heating value 34.7 MJ/kg; H2O 100000; O n.a.; H 120000; C 778270; S n.a.; N n.a.; P 750; B n.a.; Cl n.a.; Br n.a.; F n.a.; I n.a.; Ag n.a.; As 1.2; Ba n.a.; Cd 0.8; Co n.a.; Cr 11.2; Cu 100; Hg 0.0012; Mn n.a.; Mo n.a.; Ni 3.2; Pb 184; Sb n.a.; Se n.a.; Sn n.a.; V n.a.; Zn 680; Be n.a.; Sc n.a.; Sr n.a.; Ti n.a.; Tl 0.6; W n.a.; Si n.a.; Fe n.a.; Ca n.a.; Al n.a.; K n.a.; Mg n.a.; Na n.a.; Share of carbon in waste that is biogenic 0%. Net energy produced in HWI: 25.82MJ/kg thermal energy and 2.44MJ/kg electric energy. Allocation of energy production: no substitution or expansion. 100% of burden allocated to waste disposal function of HWI. One kg of this waste produces 0.01143 kg of residues, which are landfilled. Additional solidification with 0.004571 kg of cement.
[This dataset is meant to replace the following datasets:]

## Included activities end
waste-specific air and water emissions from incineration, auxiliary material consumption for flue gas cleaning. Short-term emissions to river water and long-term emissions to ground water from residual material landfill (from solidified fly ashes and scrubber slugde). Process energy demands for HWI.

## Geography
Specific to the technology encountered in Switzerland in 2000. Well applicable to modern incineration practices in Europe or North America or Japan.

## Technology
Swiss HWI plant in 2000 with wet flue gas scrubber and low-dust SCR DeNOx facility. Gross thermal efficiency 74.4% and gross electric efficiency 10%.

## Time period
Transfer coefficients for modern Swiss MSWI. Emission speciation based on early 90ies data.

## Reference product
- heat, district or industrial, other than natural gas: 1 MJ; name BP2; By-product classification allocatable product; CPC 17300: Steam and hot water; lognormal variance with pedigree 0.120025, pedigree (1,1,1,2,1)
  production volume 2.91766e9 MJ
    Calculated based on the production volume of the reference product.
  property corresponding fuel use, propane, furnace >100kW 0 MJ; name fuel_use
    Lower heating value of the fuel input related to the heat/electricity output, taken directly from ecoinvent v3.0 dataset "heat production, natural gas, at industrial furnace >100kW, GLO 2000".
  property price 0.0106 EUR2005
    Average European district heat price from Ecoheatcool and Euroheat 2005-2006, Ecoheat Work package 1: The European heat market. Final report. 10.6 EUR/GJ i s the price of district heat. http://www.solarthermalworld.org/files/Ecoheatcool%20WP1%20Web.pdf?download
  properties: carbon allocation 0 kg, carbon content 0, heating value, net 1 MJ

## Inputs from technosphere
- 1-butanol: 1.46369e-11 kg
- EDTA, ethylenediaminetetraacetic acid: 3.66171e-9 kg
- NOx retained, by selective catalytic reduction: 5.23168e-9 kg
- acetic acid, without water, in 98% solution state: 4.48803e-10 kg
- acrylic dispersion, with water, in 58% solution state: 2.56024e-11 kg
- acrylic varnish, with water, in 53% solution state: 1.60364e-8 kg
- activated carbon, granular: 8.04301e-9 kg
- activated silica: 2.38787e-8 kg
- agricultural trailer: 3.13232e-10 kg
- air compressor, screw-type compressor, 300kW: 1.29941e-12 unit
- air compressor, screw-type compressor, 4kW: 1.67084e-9 unit
- alkyd paint, white, without solvent, in 60% solution state: 1.03885e-7, 2.925e-11 kg (2 suppliers, which the file names only by identifier); sum of these 1.03915e-7 kg
- alkylketene dimer sizing agent, for paper production: 4.86882e-10 kg
- aluminium casting facility: 4.31001e-17 unit
- aluminium oxide, non-metallurgical: 1.63142e-7, 9.63632e-7 kg (2 suppliers, which the file names only by identifier); sum of these 1.12677e-6 kg
- aluminium scrap, new: -1.44765e-7, -1.44765e-7 kg (2 suppliers, which the file names only by identifier); sum of these -2.89531e-7 kg
- aluminium scrap, post-consumer: -2.1391e-8 kg
- aluminium sulfate, powder: 3.8927e-10, 8.23733e-9 kg (2 suppliers, which the file names only by identifier); sum of these 8.6266e-9 kg
- aluminium, cast alloy: 1.14648e-6 kg
- aluminium, primary, ingot: 2.34495e-7, 4.25787e-8 kg (2 suppliers, which the file names only by identifier); sum of these 2.77074e-7 kg
- aluminium, wrought alloy: 1.13025e-6 kg
- ammonia, anhydrous, liquid: 4.48283e-8, 4.57036e-9, 1.07682e-7, 3.46947e-8, 4.17427e-8, 2.3093e-8, 2.1004e-8, 1.06567e-7, 1.48437e-8 kg (9 suppliers, which the file names only by identifier); sum of these 3.99026e-7 kg
- ammonium chloride: 6.42495e-9 kg
- ammonium sulfate: 3.72524e-9 kg
- anode, for metal electrolysis: 4.41041e-10 kg
- antifouling paint emissions: -6.16515e-9 kg
- antimony: 3.03456e-11 kg
- ash from paper production sludge: -3.09627e-10, -1.18452e-8 kg (2 suppliers, which the file names only by identifier); sum of these -1.21548e-8 kg
- average incineration residue: -3.39333e-14, -2.89243e-6 kg (2 suppliers, which the file names only by identifier); sum of these -2.89243e-6 kg
- bagasse, from sugarcane: -6.36212e-7 kg
- barium carbonate: 7.81372e-10 kg
- bark: -1.97298e-7 kg
- bark chips, wet, measured as dry mass: 9.09571e-8, 1.24779e-9 kg (2 suppliers, which the file names only by identifier); sum of these 9.22049e-8 kg
- basic oxygen furnace waste: -5.31854e-5 kg
- benzene: 1.04833e-7 kg
- bilge oil: -8.42138e-11, -6.6994e-9 kg (2 suppliers, which the file names only by identifier); sum of these -6.78362e-9 kg
- biogas: 2.91161e-5 m3
- blast furnace sludge: -1.33237e-9, -7.79295e-10, -8.77284e-9, -1.97979e-10 kg (4 suppliers, which the file names only by identifier); sum of these -1.10825e-8 kg
- borax, anhydrous, powder: 7.24292e-11 kg
- bronze: 8.68538e-10 kg
- building, hall: 3.51116e-6 m2
- building, hall, steel construction: 6.49594e-10, 4.94907e-11 m2 (2 suppliers, which the file names only by identifier); sum of these 6.99085e-10 m2
- building, multi-storey: 2.8922e-10 m3
- butane: 2.44273e-10 kg
- cable, unspecified: 8.534e-9 kg
- calcium carbonate, precipitated: 1.94472e-8 kg
- calcium chloride: 6.55149e-10, 2.269e-9 kg (2 suppliers, which the file names only by identifier); sum of these 2.92415e-9 kg
- calcium nitrate: 2.18063e-8 kg
- carbon dioxide, liquid: 1.45202e-11, 1.89687e-9 kg (2 suppliers, which the file names only by identifier); sum of these 1.91139e-9 kg
- cast iron: 1.48577e-7 kg
- cement, CEM III/A: 3.85244e-7, 1.60986e-10, 5.54379e-6, 6.22956e-9 kg (4 suppliers, which the file names only by identifier); sum of these 5.93542e-6 kg
- cement, Portland: 1.38155e-10 kg
- cement, unspecified: 2.73456e-8, 1.02599e-10, 6.71096e-11, 3.85699e-11, 2.71541e-9, 7.15003e-10, 8.52336e-11, 4.35725e-10, 1.64512e-9 kg (9 suppliers, which the file names only by identifier); sum of these 3.31504e-8 kg
- ceramic tile: 6.81697e-10 kg
- charcoal: 3.66828e-8 kg
- chemical, inorganic: 3.09991e-9 kg
- chemical, organic: 5.35364e-7 kg
- chipper, mobile, diesel: 1.97978e-11 unit
- chlorine dioxide: 5.24552e-8 kg
- chlorine, liquid: 3.90392e-11, 2.92592e-11 kg (2 suppliers, which the file names only by identifier); sum of these 6.82983e-11 kg
- chlorodifluoromethane: 2.19709e-14, 1.53797e-13 kg (2 suppliers, which the file names only by identifier); sum of these 1.75768e-13 kg
- chromium steel pipe: 5.0798e-9 kg
- clay: 6.45917e-12, 4.20801e-8 kg (2 suppliers, which the file names only by identifier); sum of these 4.20866e-8 kg
- clinker: 2.15121e-9, 4.98983e-10, 3.06237e-8, 9.5448e-9, 1.02129e-8, 1.55731e-10, 6.39677e-10, 3.82846e-10 kg (8 suppliers, which the file names only by identifier); sum of these 5.42099e-8 kg
- coke: 4.54841e-6 MJ
- compressed air, 700 kPa gauge: 0.000102478 m3
- computer, desktop, without screen: 4.17093e-14 unit
- concrete mixing factory: 8.50445e-15 unit
- concrete, normal strength: 4.39489e-13, 8.38238e-14, 2.32652e-15, 8.91882e-13, 9.29328e-14, 1.70659e-10, 7.81314e-13, 3.3134e-11, 1.86111e-12, 1.62803e-9 m3 (10 suppliers, which the file names only by identifier); sum of these 1.83597e-9 m3
- containerboard, fluting medium: 2.57056e-7 kg
- containerboard, linerboard: 3.1591e-7 kg
- control cabinet, heat and power co-generation unit, 160kW electrical: 3.37253e-13 unit
- conveyor belt: 7.949e-12 m
- copper cake: -7.02229e-8 kg
- copper scrap, sorted, pressed: -2.61707e-7 kg
- copper sulfate: 6.68116e-10 kg
- copper, cathode: 2.63233e-6 kg
- core board: 1.14593e-9 kg
- corrugated board box: 6.59328e-9, 1.53037e-8, 1.32667e-7, 2.456e-10 kg (4 suppliers, which the file names only by identifier); sum of these 1.5481e-7 kg
- cyclohexane: 3.71772e-11 kg
- diesel: 3.23345e-6, 7.30167e-7, 3.09922e-9 kg (3 suppliers, which the file names only by identifier); sum of these 3.96671e-6 kg
- diesel, burned in agricultural machinery: 2.76238e-6 MJ
- diesel, burned in building machine: 1.8064e-6 MJ
- diesel, burned in diesel-electric generating set, 10MW: 1.99633e-7 MJ
- diesel, burned in diesel-electric generating set, 18.5kW: 6.32704e-8 MJ
- diesel, burned in fishing vessel: 0.000274095 MJ
- diesel, low-sulfur: 2.33892e-5 kg
- diesel-electric generating set, 10MW: 2.47935e-14 unit
- digester sludge: -1.53996e-8 kg
- dimethylamine: 3.35351e-12, 7.06429e-13 kg (2 suppliers, which the file names only by identifier); sum of these 4.05994e-12 kg
- diphenylether-compound: 2.90765e-7 kg
- display, liquid crystal, 17 inches: 8.34187e-14 unit
- dithiocarbamate-compound: 4.13918e-11 kg
- dolomite: 7.18382e-8 kg
- drawing of pipe, steel: 1.99418e-8 kg
- dust collector, electrostatic precipitator, for industrial use: 8.05663e-14 unit
- dust collector, multicyclone: 5.21367e-15 unit
- electric arc furnace dust: -3.56722e-5 kg
- electricity, high voltage: 2.58405e-7 kWh
- electricity, low voltage: 5.01502e-6, 4.3341e-5, 1.36157e-6, 4.53055e-6, 6.10034e-6, 4.19563e-6, 2.31482e-5, 8.23127e-5, 0.000256573, 4.45431e-5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 kWh (47 suppliers, which the file names only by identifier); sum of these 0.0095959 kWh
- electricity, medium voltage: 2.66169e-5, 7.49117e-5, 3.26143e-5, 1.21017e-7, 7.16097e-6, 1.99489e-6, 2.43393e-5, 3.37962e-6, 0.000132093, 4.53137e-6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 kWh (55 suppliers, which the file names only by identifier); sum of these 0.00433548 kWh
- electronic component, passive, unspecified: 2.92335e-8 kg
- electronics scrap: -2.73809e-9 kg
- electronics scrap from control units: -1.71407e-9 kg
- electronics, for control units: 1.71407e-9 kg
- energy and auxilliary inputs, metal working factory: 1.69314e-15, 3.77567e-16 kg (2 suppliers, which the file names only by identifier); sum of these 2.07071e-15 kg
- epoxy resin, liquid: 1.23354e-9 kg
- esterquat: 2.83905e-12, 5.65156e-12 kg (2 suppliers, which the file names only by identifier); sum of these 8.4906e-12 kg
- ethanol, without water, in 99.7% solution state, from ethylene: 2.28532e-10, 5.08871e-10 kg (2 suppliers, which the file names only by identifier); sum of these 7.37403e-10 kg
- ethoxylated alcohol (AE11): 4.60636e-11 kg
- ethoxylated alcohol (AE3): 1.41175e-10 kg
- ethoxylated alcohol (AE7): 2.1651e-9, 1.0278e-8 kg (2 suppliers, which the file names only by identifier); sum of these 1.24431e-8 kg
- ethylene: 3.56742e-5 kg
- ethylene glycol: 1.88014e-6 kg
- ethylene vinyl acetate copolymer: 3.36278e-10 kg
- excavation, hydraulic digger: 5.47432e-9, 3.69676e-10 m3 (2 suppliers, which the file names only by identifier); sum of these 5.844e-9 m3
- expanded perlite: 2.83035e-8 kg
- extrusion of plastic sheets and thermoforming, inline: 4.14548e-8 kg
- fatty acid methyl ester: 2.70828e-8 kg
- feldspar: 6.10865e-7 kg
- ferrite: 5.2745e-9 kg
- filter dust from Al electrolysis: -3.75703e-7 kg
- flat glass, uncoated: 2.09902e-7 kg
- fluorspar, 97% purity: 9.88164e-8 kg
- fly ash and scrubber sludge: -9.73986e-10, -8.22859e-8, -2.91879e-8 kg (3 suppliers, which the file names only by identifier); sum of these -1.12448e-7 kg
- foam glass: 3.41878e-9 kg
- forestry harvester: 9.1979e-12 unit
- formaldehyde: 4.13681e-7, 1.27413e-13 kg (2 suppliers, which the file names only by identifier); sum of these 4.13682e-7 kg
- forwarder: 8.14286e-12 unit
- furnace, wood chips, with silo, 300kW: 8.46974e-14 unit
- furnace, wood chips, with silo, 5000kW: 3.40587e-14, 4.12936e-14 unit (2 suppliers, which the file names only by identifier); sum of these 7.53523e-14 unit
- glass cullet, sorted: 3.57985e-6 kg
- glass fibre: 3.99464e-8 kg
- glider, passenger car: 2.00959e-6 kg
- glued laminated timber, average glue mix: 1.82962e-10, 3.97245e-10 m3 (2 suppliers, which the file names only by identifier); sum of these 5.80207e-10 m3
- gluing mill: 9.88811e-15 unit
- gravel, crushed: 2.68972e-6, 4.55114e-6, 1.7469e-5, 9.10134e-8, 9.9414e-7 kg (5 suppliers, which the file names only by identifier); sum of these 2.5795e-5 kg
- gravel/sand quarry infrastructure: 3.97032e-15 unit
- green liquor dregs: -1.04327e-7 kg
- hard coal: 1.63185e-8, 2.16527e-8, 9.8181e-9, 1.72744e-8, 7.86627e-8, 1.00191e-8, 7.64425e-9, 4.26075e-9, 2.32976e-9 kg (9 suppliers, which the file names only by identifier); sum of these 1.6798e-7 kg
- hazardous waste, for incineration: -3.22268e-7, -1.56356e-7, -4.08705e-9 kg (3 suppliers, which the file names only by identifier); sum of these -4.82711e-7 kg
- hazardous waste, for underground deposit: -3.07376e-7, -9.76371e-7 kg (2 suppliers, which the file names only by identifier); sum of these -1.28375e-6 kg
- heat and power co-generation unit, 160kW electrical, common components for heat+electricity: 3.59775e-12 unit
- heat and power co-generation unit, 160kW electrical, components for electricity only: 3.59775e-12 unit
- heat and power co-generation unit, 160kW electrical, components for heat only: 3.59775e-12 unit
- heat and power co-generation unit, 1MW electrical, common components for heat+electricity: 7.57693e-14 unit
- heat and power co-generation unit, 1MW electrical, components for electricity only: 7.57693e-14 unit
- heat and power co-generation unit, 1MW electrical, components for heat only: 7.57693e-14 unit
- heat and power co-generation unit, 200kW electrical, common components for heat+electricity: 3.26011e-13 unit
- heat and power co-generation unit, 200kW electrical, components for electricity only: 3.26011e-13 unit
- heat and power co-generation unit, 200kW electrical, components for heat only: 3.26011e-13 unit
- heat and power co-generation unit, 200kW electrical, diesel SCR, common components for heat+electricity: 1.69124e-13 unit
- heat and power co-generation unit, 200kW electrical, diesel SCR, components for electricity only: 1.69124e-13 unit
- heat and power co-generation unit, 200kW electrical, diesel SCR, components for heat only: 1.69124e-13 unit
- heat and power co-generation unit, 500kW electrical, common components for heat+electricity: 6.60904e-14 unit
- heat and power co-generation unit, 500kW electrical, components for electricity only: 6.60904e-14 unit
- heat and power co-generation unit, 500kW electrical, components for heat only: 6.60904e-14 unit
- heat and power co-generation unit, organic Rankine cycle, 1000kW electrical: 3.40587e-14 unit
- heat, central or small-scale, other than natural gas: 1.79871e-5, 0.000225797 MJ (2 suppliers, which the file names only by identifier); sum of these 0.000243784 MJ
- heat, district or industrial, natural gas: 0.00686857, 0.000120237, 1.65021e-6, 3.98668e-5, 9.50255e-7, 5.65423e-6, 1.6508e-5, 0.000678771, 0.0189179 MJ (9 suppliers, which the file names only by identifier); sum of these 0.0266501 MJ
- heat, district or industrial, other than natural gas: 0.000860408, 2.83567e-8, 1.6535e-5, 1.54843e-9, 7.2159e-10, 9.35938e-5, 5.27515e-8, 1.16275e-5, 1.31371e-11, 1.0378e-6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 MJ (11 suppliers, which the file names only by identifier); sum of these 0.000994085 MJ
- heavy fuel oil: 7.64847e-5, 2.15363e-8, 1.09487e-7, 1.41966e-7, 2.37127e-7, 2.76279e-8, 3.69841e-8, 5.31419e-8 kg (8 suppliers, which the file names only by identifier); sum of these 7.71126e-5 kg
- hydraulic digger: 5.27511e-12 unit
- hydrochloric acid, without water, in 30% solution state: 0.000297045, 1.37841e-9 kg (2 suppliers, which the file names only by identifier); sum of these 0.000297047 kg
- hydrogen peroxide, without water, in 50% solution state: 3.45507e-10, 8.25004e-8 kg (2 suppliers, which the file names only by identifier); sum of these 8.28459e-8 kg
- hydrogen, liquid: 6.12682e-10, 2.80378e-9 kg (2 suppliers, which the file names only by identifier); sum of these 3.41646e-9 kg
- hydropower plant, reservoir, alpine region: 1.82463e-17 unit
- hydropower plant, run-of-river: 3.23432e-17 unit
- industrial furnace, 1MW, oil: 1.95035e-12 unit
- industrial furnace, natural gas: 1.29941e-12, 3.85038e-14 unit (2 suppliers, which the file names only by identifier); sum of these 1.33791e-12 unit
- industrial machine, heavy, unspecified: 9.3616e-10 kg
- inert waste: -1.09373e-8, -2.98194e-6, -3.85524e-8 kg (3 suppliers, which the file names only by identifier); sum of these -3.03143e-6 kg
- inert waste, for final disposal: -3.08958e-8, -4.74571e-6 kg (2 suppliers, which the file names only by identifier); sum of these -4.7766e-6 kg
- injection moulding: 4.72038e-9 kg
- internal combustion engine, passenger car: 7.91826e-7 kg
- iron (III) chloride, without water, in 40% solution state: 4.1766e-11 kg
- iron sulfate: 2.11832e-9, 1.04615e-9 kg (2 suppliers, which the file names only by identifier); sum of these 3.16447e-9 kg
- iron(III) chloride, without water, in 14% iron solution state: 4.58377e-10 kg
- iron(III) sulfate, without water, in 12.5% iron solution state: 1.91002e-9 kg
- isopropanol: 2.59796e-7, 5.47271e-8 kg (2 suppliers, which the file names only by identifier); sum of these 3.14523e-7 kg
- kaolin: 1.01542e-6 kg
- keyboard: 4.17093e-14 unit
- kraft paper: 5.82252e-8 kg
- landed anchovy, fresh: 3.37638e-7 kg
- lead: 4.34097e-5 kg
- lead concentrate: 1.36371e-7 kg
- light fuel oil: 2.81267e-8, 3.69601e-9, 7.99647e-9, 3.66858e-10, 3.52739e-11, 5.04702e-9, 2.62144e-11, 2.43443e-11, 1.81771e-10 kg (9 suppliers, which the file names only by identifier); sum of these 4.55006e-8 kg
- lignite ash: -1.31806e-11, -1.81882e-7 kg (2 suppliers, which the file names only by identifier); sum of these -1.81895e-7 kg
- lime, hydrated, loose weight: 1.61413e-6 kg
- lime, hydrated, packed: 2.32781e-8, 1.97592e-10 kg (2 suppliers, which the file names only by identifier); sum of these 2.34757e-8 kg
- lime, packed: 4.32996e-8 kg
- limestone residue: -1.04603e-7 kg
- limestone, crushed, washed: 4.31681e-6, 3.68077e-8 kg (2 suppliers, which the file names only by identifier); sum of these 4.35362e-6 kg
- limestone, unprocessed: 7.31341e-9, 7.57122e-11, 1.85161e-7 kg (3 suppliers, which the file names only by identifier); sum of these 1.9255e-7 kg
- liquefied petroleum gas: 1.97712e-9, 1.52914e-9, 6.72601e-6 kg (3 suppliers, which the file names only by identifier); sum of these 6.72952e-6 kg
- long liner maintenance, steel: 1.15363e-8 kg
- long liner, steel: 1.15363e-8 kg
- lubricating oil: 0.000971284, 0.000333412 kg (2 suppliers, which the file names only by identifier); sum of these 0.0013047 kg
- magnesium: 4.67746e-11 kg
- magnesium sulfate: 1.59059e-8 kg
- maintenance, transmission network, electricity, high voltage direct current land cable: 2.74039e-10 km*year
- maize starch: 7.1663e-5 kg
- malusil: 1.90205e-8 kg
- manganese: 1.17681e-8 kg
- manganese dioxide: 9.37061e-9 kg
- manganese sulfate: 2.83167e-11 kg
- manual dismantling of used passenger car with internal combustion engine: 2.80141e-6 unit
- meat and bone meal: 2.23616e-11, 3.77027e-14 kg (2 suppliers, which the file names only by identifier); sum of these 2.23993e-11 kg
- medium density fibreboard: 6.87495e-11, 4.40303e-10 m3 (2 suppliers, which the file names only by identifier); sum of these 5.09053e-10 m3
- melamine urea formaldehyde adhesive: 2.79177e-8 kg
- metal working factory: 2.07071e-15 unit
- metal working, average for chromium steel product manufacturing: 1.02363e-9 kg
- metal working, average for steel product manufacturing: 9.49598e-7 kg
- methanol: 1.65141e-9 kg
- methanol, from biomass: 2.90328e-8 kg
- methyl ethyl ketone: 6.17636e-10, 2.33066e-10 kg (2 suppliers, which the file names only by identifier); sum of these 8.50702e-10 kg
- molybdenum: 5.61457e-11 kg
- monoethanolamine: 1.43887e-12 kg
- municipal solid waste: -9.78031e-7, -3.86546e-8, -2.17048e-7, -4.41069e-15, -1.37895e-14, -2.08127e-15, -2.34945e-12, -9.6555e-15, -2.02693e-14, -1.15931e-15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 kg (42 suppliers, which the file names only by identifier); sum of these -3.5401e-6 kg
- municipal waste collection service by 21 metric ton lorry: 3.51697e-9 metric ton*km
- natural gas processing plant: 6.21346e-19 unit
- natural gas, burned in gas turbine: 3.16794e-6 MJ
- natural gas, high pressure: 1.61382e-10, 7.9224e-12, 6.81199e-11, 3.90141e-10, 1.15779e-10, 6.54971e-9, 6.69432e-10, 2.67723e-11, 5.76122e-11, 4.87098e-11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 m3 (47 suppliers, which the file names only by identifier); sum of these 1.99641e-6 m3
- natural gas, low pressure: 6.00969e-6 m3
- nickel, class 1: 7.95371e-16 kg
- nitric acid, without water, in 50% solution state: 1.4525e-9, 1.88959e-8, 2.15819e-9, 5.36701e-9, 6.97964e-9, 2.57159e-9, 8.84461e-9, 2.33173e-9, 2.1502e-9 kg (9 suppliers, which the file names only by identifier); sum of these 5.07514e-8 kg
- nitrogen, liquid: 4.07255e-8, 2.12531e-6, 5.83384e-7 kg (3 suppliers, which the file names only by identifier); sum of these 2.74942e-6 kg
- oil power plant, 500MW: 3.90549e-15 unit
- operation, reefer, freezing: 5.31915e-6 kg*day
- oxygen, liquid: 9.18663e-5 kg
- ozone, liquid: 1.44465e-10 kg
- packaging box factory: 7.39073e-16 unit
- packaging film, low density polyethylene: 2.61652e-7 kg
- palladium: 1.07266e-13 kg
- paper mill, integrated: 3.74271e-17 unit
- paper, woodcontaining, lightweight coated: 2.11362e-8 kg
- paper, woodfree, coated: 1.03375e-7 kg
- paper, woodfree, uncoated: 1.99627e-13 kg
- paraffin: 1.69037e-10 kg
- particleboard, uncoated: 7.63194e-10, 3.68702e-10 m3 (2 suppliers, which the file names only by identifier); sum of these 1.1319e-9 m3
- peat: 9.45134e-9 kg
- pesticide, unspecified: 1.51664e-13 kg
- petrol, unleaded: 3.9772e-12, 4.57957e-10, 1.48787e-11, 1.7365e-10, 1.64904e-11, 3.99016e-12, 8.19271e-13 kg (7 suppliers, which the file names only by identifier); sum of these 6.71763e-10 kg
- petroleum coke: 2.62253e-10 kg
- phenol: 1.32055e-7 kg
- phosphane: 2.58218e-12 kg
- phosphoric acid, industrial grade, without water, in 85% solution state: 1.94118e-9 kg
- pig iron: 5.44686e-10, 5.88071e-9 kg (2 suppliers, which the file names only by identifier); sum of these 6.4254e-9 kg
- pipeline, natural gas, long distance, high capacity, offshore: 2.41197e-15 km
- pipeline, natural gas, long distance, low capacity, onshore: 9.64788e-15 km
- pitch despergents, in paper production: 5.37154e-11 kg
- platinum: 5.72085e-13 kg
- plywood: 1.07517e-10, 2.28123e-9 m3 (2 suppliers, which the file names only by identifier); sum of these 2.38875e-9 m3
- pointing device, optical mouse, with cable: 4.17093e-14 unit
- polyacrylamide: 6.00718e-9 kg
- polyethylene terephthalate, granulate, amorphous: 3.30906e-5 kg
- polyethylene, high density, granulate: 4.75709e-6 kg
- polyethylene, low density, granulate: 1.78125e-8 kg
- polymer foaming: 8.4798e-11 kg
- polyphenylene sulfide: 9.83272e-9 kg
- polypropylene, granulate: 6.34062e-6 kg
- polystyrene, high impact: 6.74506e-13 kg
- polyurethane adhesive: 1.53071e-8 kg
- polyvinylchloride, bulk polymerised: 9.06056e-8 kg
- polyvinylchloride, emulsion polymerised: 6.96155e-11 kg
- polyvinylchloride, suspension polymerised: 4.51567e-8 kg
- potassium hydroxide: 2.1609e-10 kg
- potassium permanganate: 1.04217e-10 kg
- potato starch: 4.58674e-9 kg
- printed wiring board, surface mounted, unspecified, Pb free: 3.81306e-9 kg
- printing ink, offset, without solvent, in 47.5% solution state: 9.41579e-10 kg
- propane: 5.58254e-9 kg
- propane, burned in building machine: 4.40907e-7 MJ
- propylene glycol, liquid: 6.17593e-9, 3.05003e-9 kg (2 suppliers, which the file names only by identifier); sum of these 9.22597e-9 kg
- pulp factory: 4.21884e-16 unit
- pulpwood, hardwood, measured as solid wood under bark: 1.29983e-8, 6.72691e-11, 7.57591e-12 m3 (3 suppliers, which the file names only by identifier); sum of these 1.30731e-8 m3
- pulpwood, softwood, measured as solid wood under bark: 5.6091e-10, 7.91191e-9, 8.71296e-10, 1.39114e-8 m3 (4 suppliers, which the file names only by identifier); sum of these 2.32555e-8 m3
- purse seiner maintenance, steel: 1.83361e-9 kg
- purse seiner, steel: 1.83361e-9 kg
- quicklime, in pieces, loose: 4.83052e-8, 7.99404e-13 kg (2 suppliers, which the file names only by identifier); sum of these 4.8306e-8 kg
- quicklime, milled, loose: 1.16594e-7, 3.67513e-8 kg (2 suppliers, which the file names only by identifier); sum of these 1.53345e-7 kg
- quicklime, milled, packed: 5.56441e-11, 6.55536e-9 kg (2 suppliers, which the file names only by identifier); sum of these 6.61101e-9 kg
- recultivation, limestone mine: 7.08807e-10 m2
- refractory, fireclay, packed: 4.33409e-8 kg
- reinforcing steel: 1.45477e-7 kg
- residual softwood, wet: 4.4127e-12, 2.28978e-10 m3 (2 suppliers, which the file names only by identifier); sum of these 2.33391e-10 m3
- residue from cooling tower: -4.23854e-8, -3.59782e-10 kg (2 suppliers, which the file names only by identifier); sum of these -4.27452e-8 kg
- retention aid, for paper production: 7.5477e-10 kg
- road vehicle factory: 2.71173e-17 unit
- rolling mill: 4.64681e-11 unit
- rosin size, for paper production: 1.54513e-9 kg
- sand: 2.08011e-7, 1.07989e-9, 1.0964e-5, 1.35365e-5 kg (4 suppliers, which the file names only by identifier); sum of these 2.47096e-5 kg
- sawdust, loose, wet, measured as dry mass: -1.73622e-7 kg
- sawdust, wet, measured as dry mass: 3.3878e-8, 2.93791e-6 kg (2 suppliers, which the file names only by identifier); sum of these 2.97179e-6 kg
- sawlog and veneer log, hardwood, measured as solid wood under bark: 7.10105e-9, 6.67676e-10 m3 (2 suppliers, which the file names only by identifier); sum of these 7.76872e-9 m3
- sawlog and veneer log, softwood, debarked, measured as solid wood: 2.07471e-11 m3
- sawlog and veneer log, softwood, measured as solid wood under bark: 2.94048e-13, 6.14256e-11, 6.73863e-10, 3.76918e-9 m3 (4 suppliers, which the file names only by identifier); sum of these 4.50476e-9 m3
- sawmill: 4.99185e-16 unit
- sawnwood, board, softwood, raw, dried (u=10%): 4.26707e-11, 7.60018e-9, 1.02248e-9 m3 (3 suppliers, which the file names only by identifier); sum of these 8.66533e-9 m3
- sawnwood, hardwood, dried (u=10%), planed: 1.62e-11, 6.5774e-12 m3 (2 suppliers, which the file names only by identifier); sum of these 2.27774e-11 m3
- sawnwood, softwood, raw, dried (u=20%): 2.55868e-9 m3
- scrap aluminium: -6.60523e-7, -3.09902e-8, -1.02374e-7 kg (3 suppliers, which the file names only by identifier); sum of these -7.93887e-7 kg
- scrap copper: -7.85984e-8, -2.93861e-7, -3.20572e-8 kg (3 suppliers, which the file names only by identifier); sum of these -4.04517e-7 kg
- scrap lead acid battery: -2.47842e-5 kg
- scrap steel: -8.39511e-9, -3.6195e-6, -1.1682e-6 kg (3 suppliers, which the file names only by identifier); sum of these -4.7961e-6 kg
- seal, natural rubber based: 1.61601e-8 kg
- section bar extrusion, aluminium: 3.3882e-10 kg
- shavings, hardwood, measured as dry mass: 7.78352e-7, 3.69822e-9 kg (2 suppliers, which the file names only by identifier); sum of these 7.8205e-7 kg
- shavings, softwood, loose, measured as dry mass: -3.01385e-7 kg
- shavings, softwood, measured as dry mass: 9.91744e-9, 7.72133e-7 kg (2 suppliers, which the file names only by identifier); sum of these 7.8205e-7 kg
- shed, large, wood, non-insulated, fire-unprotected: 1.18498e-12 m2
- sheet rolling, aluminium: 3.03528e-12 kg
- sheet rolling, chromium steel: 9.84734e-10 kg
- sheet rolling, steel: 1.15765e-7, 9.61832e-10 kg (2 suppliers, which the file names only by identifier); sum of these 1.16727e-7 kg
- silica sand: 2.03615e-6 kg
- silicon carbide: 8.06289e-8 kg
- silicone product: 1.33443e-7, 7.12342e-12 kg (2 suppliers, which the file names only by identifier); sum of these 1.3345e-7 kg
- silver: 6.52406e-12 kg
- skidder: 6.54034e-12 unit
- sludge from pulp and paper production: -3.02661e-10, -2.73127e-8 kg (2 suppliers, which the file names only by identifier); sum of these -2.76154e-8 kg
- sludge from steel rolling: -0.000742827 kg
- soap: 3.82745e-5 kg
- soda ash, dense: 2.85382e-8 kg
- soda ash, light: 8.93717e-7 kg
- sodium borates: 2.58719e-7 kg
- sodium chlorate, powder: 9.73231e-8 kg
- sodium chloride, powder: 2.02311e-9 kg
- sodium dichromate: 1.26685e-7 kg
- sodium formate: 4.26523e-9 kg
- sodium hydrogen sulfite: 1.38737e-8 kg
- sodium hydrosulfide: 7.80338e-9 kg
- sodium hydroxide, without water, in 50% solution state: 3.74385e-7 kg
- sodium hypochlorite, without water, in 15% solution state: 1.21822e-10, 5.55961e-10 kg (2 suppliers, which the file names only by identifier); sum of these 6.77783e-10 kg
- sodium metasilicate pentahydrate, 58% active substance, powder: 9.71926e-13, 1.96803e-12 kg (2 suppliers, which the file names only by identifier); sum of these 2.93995e-12 kg
- sodium nitrite: 2.47256e-10, 1.21783e-10 kg (2 suppliers, which the file names only by identifier); sum of these 3.69039e-10 kg
- sodium silicate, without water, in 37% solution state: 8.51854e-11, 4.20695e-11 kg (2 suppliers, which the file names only by identifier); sum of these 1.27255e-10 kg
- sodium sulfate, anhydrite: 6.15749e-10, 2.04407e-9 kg (2 suppliers, which the file names only by identifier); sum of these 2.65982e-9 kg
- sodium sulfide: 2.21494e-10 kg
- solvent, organic: 5.02802e-7 kg
- spent antifreezer liquid: -6.37116e-12 kg
- spent solvent mixture: -5.40478e-7, -4.94771e-9, -2.11184e-7 kg (3 suppliers, which the file names only by identifier); sum of these -7.56609e-7 kg
- steam, in chemical industry: 1.04603e-11, 5.93281e-11 kg (2 suppliers, which the file names only by identifier); sum of these 6.97884e-11 kg
- steel in car shredder residue: -2.77995e-9, -6.66781e-6 kg (2 suppliers, which the file names only by identifier); sum of these -6.67059e-6 kg
- steel, chromium steel 18/8: 1.86337e-7 kg
- steel, chromium steel 18/8, hot rolled: 6.24753e-7 kg
- steel, low-alloyed: 4.15422e-6 kg
- steel, low-alloyed, hot rolled: 1.28876e-5 kg
- steel, unalloyed: 0.00135497 kg
- stone wool factory: 1.9898e-15 unit
- stone wool, packed: 1.06803e-8 kg
- strontium carbonate: 2.75638e-9 kg
- sugarcane: 7.77766e-6 kg
- sulfamic acid: 1.73638e-12 kg
- sulfate pulp, bleached: 1.07125e-8 kg
- sulfate pulp, unbleached: 3.82588e-10 kg
- sulfidic tailings, from zinc-lead mine operation: -7.40206e-10, -1.3295e-10, -1.04204e-10, -2.50808e-10, -3.78008e-11, -9.12681e-11, -4.25726e-10, -1.93316e-10 kg (8 suppliers, which the file names only by identifier); sum of these -1.97628e-9 kg
- sulfite pulp, bleached: 3.5447e-9 kg
- sulfur: 2.79417e-10 kg
- sulfur hexafluoride, liquid: 5.30811e-11 kg
- sulfuric acid: 1.33229e-7, 0.000136197 kg (2 suppliers, which the file names only by identifier); sum of these 0.00013633 kg
- synthetic gas factory: 5.37545e-15 unit
- synthetic rubber: 0.000114193 kg
- tap water: 1.89403e-8, 0.000476515, 2.52692e-5, 9.70838e-7, 0.000216599, 2.7699e-5, 1.86983e-6, 0.00092458, 6.36859e-7, 4.88014e-6 kg (10 suppliers, which the file names only by identifier); sum of these 0.00167904 kg
- tetraethyl orthosilicate: 8.17518e-7 kg
- tin plated chromium steel sheet, 2 mm: 1.61882e-11 m2
- titanium dioxide: 8.91409e-9, 1.78282e-8 kg (2 suppliers, which the file names only by identifier); sum of these 2.67423e-8 kg
- tractor, 4-wheel, agricultural: 3.90293e-10 kg
- transformer, high voltage use: 7.62192e-11 kg
- transport, freight train: 4.31844e-6, 5.14257e-8 metric ton*km (2 suppliers, which the file names only by identifier); sum of these 4.36987e-6 metric ton*km
- transport, freight, inland waterways, barge: 1.28068e-6 metric ton*km
- transport, freight, lorry 16-32 metric ton, EURO3: 3.63361e-8, 1.50196e-7, 3.36899e-7 metric ton*km (3 suppliers, which the file names only by identifier); sum of these 5.23431e-7 metric ton*km
- transport, freight, lorry 16-32 metric ton, EURO4: 2.1429e-9 metric ton*km
- transport, freight, lorry 16-32 metric ton, EURO5: 8.39162e-5 metric ton*km
- transport, freight, lorry 3.5-7.5 metric ton, EURO3: 2.94557e-12 metric ton*km
- transport, freight, lorry >32 metric ton, EURO3: 1.89737e-8 metric ton*km
- transport, freight, lorry >32 metric ton, EURO5: 2.94446e-6 metric ton*km
- transport, freight, sea, bulk carrier for dry goods: 6.05269e-6 metric ton*km
- transport, freight, sea, container ship: 2.34113e-7 metric ton*km
- trawler maintenance, steel: 5.7584e-8 kg
- trawler, steel: 5.7584e-8 kg
- triazine-compound, unspecified: 3.40886e-11 kg
- urea: 2.26905e-7, 7.29281e-11, 6.22754e-11 kg (3 suppliers, which the file names only by identifier); sum of these 2.2704e-7 kg
- urea formaldehyde resin: 3.06673e-7 kg
- used cable: -8.534e-9 kg
- used intermodal shipping container, 20-foot: -4.20077e-11 unit
- used intermodal shipping container, 40-foot: -2.01618e-11 unit
- used intermodal shipping container, 40-foot, high-cube: -2.76483e-11 unit
- used internal combustion engine, passenger car: -9.83272e-8 kg
- used printed wiring boards: -3.81306e-9 kg
- used tyre: -0.000119227 kg
- vegetable oil, refined: 5.72192e-8 kg
- waste aluminium: -8.18789e-9 kg
- waste concrete: -3.58294e-6, -2.02846e-6, -1.48803e-7 kg (3 suppliers, which the file names only by identifier); sum of these -5.7602e-6 kg
- waste concrete, not reinforced: -5.73221e-10, -6.07371e-12, -8.18086e-9 kg (3 suppliers, which the file names only by identifier); sum of these -8.76015e-9 kg
- waste electric and electronic equipment: -2.92335e-8 kg
- waste emulsion paint: -1.77376e-18, -5.9951e-14, -5.65124e-15 kg (3 suppliers, which the file names only by identifier); sum of these -6.5604e-14 kg
- waste emulsion paint, separated: -5.15578e-10 kg
- waste glass: -4.57888e-11, -3.54014e-10, -8.47985e-10, -9.20044e-9, -7.91158e-11, -1.74765e-8, -1.20142e-10, -8.67063e-8, -1.92379e-11, -2.22726e-9 kg (10 suppliers, which the file names only by identifier); sum of these -1.17077e-7 kg
- waste glass sheet: -2.07675e-7 kg
- waste graphical paper: -1.03375e-7 kg
- waste gypsum: -5.91314e-11, -1.2509e-9, -4.07275e-9 kg (3 suppliers, which the file names only by identifier); sum of these -5.38278e-9 kg
- waste mineral oil: -3.76398e-5, -0.000845872, -0.0012636 kg (3 suppliers, which the file names only by identifier); sum of these -0.00214711 kg
- waste mineral wool: -7.54921e-9, -3.53246e-11, -3.09573e-9 kg (3 suppliers, which the file names only by identifier); sum of these -1.06803e-8 kg
- waste packaging paper: -1.16385e-9 kg
- waste paint: -3.22297e-11, -6.90568e-13, -2.30126e-10 kg (3 suppliers, which the file names only by identifier); sum of these -2.63046e-10 kg
- waste paint on metal: -3.14411e-9, -2.66883e-11 kg (2 suppliers, which the file names only by identifier); sum of these -3.1708e-9 kg
- waste paper, unsorted: -1.71449e-8, -1.75135e-11, -1.71449e-8 kg (3 suppliers, which the file names only by identifier); sum of these -3.43074e-8 kg
- waste paperboard: -5.75877e-7, -4.76115e-9, -3.75596e-7, -7.00558e-5, -3.77118e-6, -9.26151e-6, -2.02904e-7, -6.78924e-10, -5.0208e-7, -5.03552e-8 kg (10 suppliers, which the file names only by identifier); sum of these -8.48008e-5 kg
- waste paperboard, sorted: 2.45989e-7 kg
- waste plastic, mixture: -1.5487e-10, -7.82588e-13, -7.37255e-11, -1.72665e-12, -1.70723e-10, -8.30559e-7, -4.25856e-7, -1.03478e-11, -4.05858e-12, -4.27402e-12 kg (10 suppliers, which the file names only by identifier); sum of these -1.25684e-6 kg
- waste polyethylene: -3.11077e-9, -3.75518e-5 kg (2 suppliers, which the file names only by identifier); sum of these -3.75549e-5 kg
- waste polyethylene terephthalate: -2.90815e-13, -3.74106e-15, -1.11904e-8, -9.2603e-15, -3.35549e-13, -1.6956e-15, -8.79353e-15, -2.34903e-12, -2.24201e-14 kg (9 suppliers, which the file names only by identifier); sum of these -1.11934e-8 kg
- waste polyethylene/polypropylene product: -6.55671e-8, -1.4609e-5, -4.38378e-7 kg (3 suppliers, which the file names only by identifier); sum of these -1.51129e-5 kg
- waste polypropylene: -5.14879e-10 kg
- waste polystyrene: -5.25952e-13, -8.37629e-16, -7.513e-14, -2.0734e-15, -3.79647e-16, -5.0199e-15, -6.51139e-14 kg (7 suppliers, which the file names only by identifier); sum of these -6.74506e-13 kg
- waste polyvinylchloride: -5.11551e-11, -2.65295e-10, -1.12865e-10, -2.79378e-10, -4.46809e-8, -6.76401e-10, -1.01233e-8, -8.77371e-9, -7.08688e-8 kg (9 suppliers, which the file names only by identifier); sum of these -1.35832e-7 kg
- waste reinforcement steel: -1.40584e-7, -9.7615e-11 kg (2 suppliers, which the file names only by identifier); sum of these -1.40681e-7 kg
- waste rubber, unspecified: -9.56931e-9, -1.49534e-7, -1.49396e-7 kg (3 suppliers, which the file names only by identifier); sum of these -3.08499e-7 kg
- waste textile, soiled: -2.3857e-8, -3.57078e-10 kg (2 suppliers, which the file names only by identifier); sum of these -2.42141e-8 kg
- waste wire plastic: -2.46635e-8 kg
- waste wood pole, chrome preserved: -1.34774e-8 kg
- waste wood, post-consumer: -1.43055e-6, -1.40434e-6 kg (2 suppliers, which the file names only by identifier); sum of these -2.83489e-6 kg
- waste wood, untreated: -1.39548e-12, -1.28041e-11, -1.90871e-11, -2.03945e-9, -8.09918e-12, -1.172e-8, -5.361e-11, -1.53724e-10 kg (8 suppliers, which the file names only by identifier); sum of these -1.40082e-8 kg
- waste x-ray film: -5.84749e-8 kg
- waste yarn and waste textile: -8.42674e-5 kg
- waste zeolite: -1.20319e-8 kg
- wastewater from concrete production: -1.4419e-11, -2.98168e-9 m3 (2 suppliers, which the file names only by identifier); sum of these -2.9961e-9 m3
- wastewater from particle board production: -1.27684e-10 m3
- wastewater from plywood production: -3.0261e-10 m3
- wastewater from vegetable oil refinery: -1.66279e-8 m3
- wastewater, average: -8.39548e-9, -6.82732e-9, -2.42537e-9, -1.05146e-6, -2.51426e-7 m3 (5 suppliers, which the file names only by identifier); sum of these -1.32054e-6 m3
- wastewater, unpolluted: -1.93364e-9, -3.99853e-7 m3 (2 suppliers, which the file names only by identifier); sum of these -4.01787e-7 m3
- water pump, 22kW: 1.10472e-10 unit
- water, completely softened: 3.20888e-5 kg
- water, decarbonised: 5.06057e-7, 6.68783e-8, 2.48442e-8, 0.000156989, 2.04105e-6, 2.59909e-7, 1.94488e-7 kg (7 suppliers, which the file names only by identifier); sum of these 0.000160082 kg
- water, deionised: 4.44421e-7, 0.000123459, 3.22158e-5 kg (3 suppliers, which the file names only by identifier); sum of these 0.000156119 kg
- wax, lost-wax casting: 4.86327e-7 kg
- welding, arc, steel: 5.35887e-9 m
- wire drawing, copper: 1.00709e-7, 5.48968e-9 kg (2 suppliers, which the file names only by identifier); sum of these 1.06199e-7 kg
- wire drawing, steel: 1.21766e-9 kg
- wood ash mixture, pure: -1.02442e-7, -3.06089e-8 kg (2 suppliers, which the file names only by identifier); sum of these -1.33051e-7 kg
- wood chips, dry, measured as dry mass: 1.74539e-6 kg
- wood chips, wet, measured as dry mass: 1.03446e-6, 2.22957e-6, 8.88432e-6 kg (3 suppliers, which the file names only by identifier); sum of these 1.21484e-5 kg
- wood pellet factory: 2.08547e-15 unit
- wood pellet, measured as dry mass: 4.74831e-8 kg
- wood preservation, oscillating pressure method, inorganic salt, containing Cr, outdoor use, ground contact: 1.52809e-9 kg
- wood preservation, pressure vessel, creosote, outdoor use, ground contact: 2.206e-8 kg
- wood preservative, inorganic salt, containing Cr: 3.692e-10 kg
- wooden board factory, organic bonded boards: 7.62766e-17, 1.51205e-16 unit (2 suppliers, which the file names only by identifier); sum of these 2.27482e-16 unit
- yarn, cotton: 0.00429764 kg
- zeolite, powder: 1.20319e-8 kg
- zinc: 2.31773e-7 kg
- zinc coat, pieces: 2.94116e-8 m2
- zinc concentrate: 1.21713e-5 kg
- zinc oxide: 3.12517e-7 kg
- zinc slag: -1.52599e-6 kg
- zircon: 3.04362e-7 kg

## Inputs from nature
- Energy, potential (in hydropower reservoir), converted [natural resource, in water]: 0.000324809 MJ
- Fish, demersal, in ocean [natural resource, biotic]: 5.91964e-6 kg
- Fish, pelagic, in ocean [natural resource, biotic]: 9.32484e-6 kg
- Gravel [natural resource, in ground]: 8.69291e-5 kg
- Occupation, construction site [natural resource, land]: 2.60337e-10 m2*year
- Occupation, industrial area [natural resource, land]: 1.52689e-8 m2*year
- Occupation, lake, artificial [natural resource, land]: 1.6269e-7 m2*year
- Occupation, mineral extraction site [natural resource, land]: 2.40727e-8 m2*year
- Occupation, river, artificial [natural resource, land]: 1.80128e-7 m2*year
- Oxygen [natural resource, in air]: 1.69389e-5 kg
- Transformation, from arable land, unspecified use [natural resource, land]: 1.44976e-10 m2
- Transformation, from forest, unspecified [natural resource, land]: 1.15053e-10 m2
- Transformation, from pasture, man made [natural resource, land]: 1.36914e-9 m2
- Transformation, from shrub land, sclerophyllous [natural resource, land]: 1.1258e-9 m2
- Transformation, from unspecified [natural resource, land]: 3.97516e-9 m2
- Transformation, to industrial area [natural resource, land]: 5.36419e-10 m2
- Transformation, to lake, artificial [natural resource, land]: 1.56325e-9 m2
- Transformation, to mineral extraction site [natural resource, land]: 2.40727e-9 m2
- Transformation, to river, artificial [natural resource, land]: 2.23157e-9 m2
- Volume occupied, reservoir [natural resource, in water]: 6.84561e-6 m3*year
- Water, cooling, unspecified natural origin [natural resource, in water]: 0.000766986 m3
- Water, river [natural resource, in water]: 1.72374e-7 m3
- Water, turbine use, unspecified natural origin [natural resource, in water]: 0.00183985 m3
- Water, unspecified natural origin [natural resource, in water]: 4.66105e-5 m3
- Water, well, in ground [natural resource, in water]: 6.33676e-6 m3

## Emissions to nature
- 2-Propanol [air, unspecified]: 1.14916e-11 kg
- Acetaldehyde [air, unspecified]: 2.92903e-12 kg
- Acetaldehyde [air, urban air close to ground]: 8.03551e-10 kg
- Acetic acid [air, unspecified]: 2.54575e-13 kg
- Acetic acid [air, urban air close to ground]: 3.2644e-9 kg
- Acetone [air, unspecified]: 7.54832e-10 kg
- Acetone [air, urban air close to ground]: 7.98734e-10 kg
- Aluminium III [air, unspecified]: 2.90018e-12 kg
- Aluminium III [air, urban air close to ground]: 1.48946e-12 kg
- Ammonia [air, unspecified]: 7.36381e-9 kg
- Ammonia [air, urban air close to ground]: 1.5107e-9 kg
- Antimony ion [air, unspecified]: 5.24827e-13 kg
- Antimony ion [air, urban air close to ground]: 2.36398e-15 kg
- Arsenic ion [air, unspecified]: 1.44661e-12 kg
- Arsenic ion [air, urban air close to ground]: 2.22866e-11 kg
- Barium II [air, unspecified]: 3.45403e-14 kg
- Barium II [air, urban air close to ground]: 2.78184e-14 kg
- Benzene [air, non-urban air or from high stacks]: 2.68038e-12 kg
- Benzene [air, unspecified]: 4.41351e-11 kg
- Benzene [air, urban air close to ground]: 2.4373e-10 kg
- Benzene, ethyl- [air, unspecified]: 1.43094e-12 kg
- Benzene, ethyl- [air, urban air close to ground]: 2.35823e-12 kg
- Benzene, hexachloro- [air, unspecified]: 3.43425e-19 kg
- Benzene, hexachloro- [air, urban air close to ground]: 5.65975e-19 kg
- Benzo(a)pyrene [air, non-urban air or from high stacks]: 1.34019e-14 kg
- Benzo(a)pyrene [air, unspecified]: 7.25673e-13 kg
- Benzo(a)pyrene [air, urban air close to ground]: 8.87973e-14 kg
- Beryllium II [air, unspecified]: 3.45403e-16 kg
- Beryllium II [air, urban air close to ground]: 1.76501e-13 kg
- Boron [air, unspecified]: 1.65914e-13 kg
- Boron [air, urban air close to ground]: 1.05617e-12 kg
- Bromine [air, unspecified]: 2.86453e-12 kg
- Bromine [air, urban air close to ground]: 4.7182e-12 kg
- Butane [air, non-urban air or from high stacks]: 1.92552e-12 kg
- Butane [air, unspecified]: 8.73112e-13 kg
- Butane [air, urban air close to ground]: 1.52958e-11 kg
- Cadmium II [air, non-urban air or from high stacks]: 3.13604e-14 kg
- Cadmium II [air, unspecified]: 3.7951e-11 kg
- Cadmium II [air, urban air close to ground]: 1.0673e-11 kg
- Calcium [air, unspecified]: 2.79566e-10 kg
- Calcium [air, urban air close to ground]: 5.5951e-10 kg
- Carbon dioxide, fossil [air, non-urban air or from high stacks]: 7.48163e-5 kg
- Carbon dioxide, fossil [air, unspecified]: 1.19523e-5 kg
- Carbon dioxide, fossil [air, urban air close to ground]: 0.000263071 kg
- Carbon dioxide, non-fossil [air, non-urban air or from high stacks]: 5.6962e-5 kg
- Carbon dioxide, non-fossil [air, unspecified]: 5.6961e-6 kg
- Carbon dioxide, non-fossil [air, urban air close to ground]: 3.71932e-5 kg
- Carbon monoxide, fossil [air, non-urban air or from high stacks]: 9.11327e-8 kg
- Carbon monoxide, fossil [air, unspecified]: 6.27209e-7 kg
- Carbon monoxide, fossil [air, urban air close to ground]: 7.53351e-8 kg
- Carbon monoxide, non-fossil [air, non-urban air or from high stacks]: 3.22908e-8 kg
- Carbon monoxide, non-fossil [air, unspecified]: 1.1323e-8 kg
- Carbon monoxide, non-fossil [air, urban air close to ground]: 1.85726e-8 kg
- Chlorine [air, unspecified]: 9.20898e-12 kg
- Chlorine [air, urban air close to ground]: 1.41494e-11 kg
- Chromium III [air, non-urban air or from high stacks]: 1.56802e-13 kg
- Chromium III [air, unspecified]: 4.75003e-9 kg
- Chromium III [air, urban air close to ground]: 3.86519e-11 kg
- Chromium VI [air, non-urban air or from high stacks]: 3.13604e-16 kg
- Chromium VI [air, unspecified]: 2.68087e-15 kg
- Chromium VI [air, urban air close to ground]: 9.86701e-13 kg
- Cobalt II [air, unspecified]: 2.15799e-14 kg
- Cobalt II [air, urban air close to ground]: 1.17667e-10 kg
- Copper ion [air, non-urban air or from high stacks]: 5.32054e-12 kg
- Copper ion [air, unspecified]: 9.55649e-10 kg
- Copper ion [air, urban air close to ground]: 1.53342e-10 kg
- Dinitrogen monoxide [air, non-urban air or from high stacks]: 2.49109e-9 kg
- Dinitrogen monoxide [air, unspecified]: 2.91414e-9 kg
- Dinitrogen monoxide [air, urban air close to ground]: 1.41268e-8 kg
- Dioxins, measured as 2,3,7,8-tetrachlorodibenzo-p-dioxin [air, unspecified]: 2.91686e-18 kg
- Dioxins, measured as 2,3,7,8-tetrachlorodibenzo-p-dioxin [air, urban air close to ground]: 3.47469e-17 kg
- Ethane [air, non-urban air or from high stacks]: 2.50318e-11 kg
- Ethane [air, unspecified]: 4.52473e-13 kg
- Ethane [air, urban air close to ground]: 1.42293e-12 kg
- Ethanol [air, non-urban air or from high stacks]: 6.33101e-10 kg
- Ethanol [air, unspecified]: 3.64979e-14 kg
- Ethanol [air, urban air close to ground]: 1.63059e-9 kg
- Ethylene [air, unspecified]: 9.04946e-13 kg
- Ethylene [air, urban air close to ground]: 2.84586e-12 kg
- Ethyne [air, unspecified]: 1.50824e-13 kg
- Ethyne [air, urban air close to ground]: 4.74309e-13 kg
- Fluorine [air, unspecified]: 4.06634e-10 kg
- Fluorine [air, urban air close to ground]: 3.93038e-12 kg
- Formaldehyde [air, unspecified]: 2.57336e-9 kg
- Formaldehyde [air, urban air close to ground]: 2.45848e-9 kg
- Heat, waste [air, non-urban air or from high stacks]: 8.36916e-10 MJ
- Helium [air, unspecified]: 3.80726e-11 kg
- Hydrocarbons, aliphatic, alkanes, unspecified [air, unspecified]: 4.3672e-11 kg
- Hydrocarbons, aliphatic, alkanes, unspecified [air, urban air close to ground]: 1.99976e-7 kg
- Hydrocarbons, aliphatic, unsaturated [air, unspecified]: 1.48022e-10 kg
- Hydrocarbons, aliphatic, unsaturated [air, urban air close to ground]: 8.75542e-10 kg
- Hydrocarbons, aromatic [air, unspecified]: 2.07007e-14 kg
- Hydrocarbons, aromatic [air, urban air close to ground]: 3.29013e-11 kg
- Hydrocarbons, unspecified [air, non-urban air or from high stacks]: 1.94677e-11 kg
- Hydrochloric acid [air, unspecified]: 5.84649e-8 kg
- Hydrochloric acid [air, urban air close to ground]: 1.47212e-10 kg
- Hydrogen [air, unspecified]: 2.33831e-11 kg
- Hydrogen fluoride [air, unspecified]: 3.53473e-13 kg
- Hydrogen fluoride [air, urban air close to ground]: 9.52609e-11 kg
- Hydrogen sulfide [air, unspecified]: 1.17178e-11 kg
- Hydrogen sulfide [air, urban air close to ground]: 3.69244e-10 kg
- Iodine [air, unspecified]: 3.20293e-15 kg
- Iodine [air, urban air close to ground]: 4.57595e-15 kg
- Iron ion [air, unspecified]: 7.69062e-8 kg
- Iron ion [air, urban air close to ground]: 2.24212e-10 kg
- Lead II [air, unspecified]: 3.98794e-10 kg
- Lead II [air, urban air close to ground]: 1.12584e-10 kg
- Lead-210 [air, unspecified]: 1.2639e-11 kBq
- Lead-210 [air, urban air close to ground]: 7.40953e-12 kBq
- Magnesium [air, unspecified]: 1.82395e-11 kg
- Magnesium [air, urban air close to ground]: 2.91328e-11 kg
- Manganese II [air, unspecified]: 2.78762e-9 kg
- Manganese II [air, urban air close to ground]: 5.03274e-11 kg
- Mercury II [air, non-urban air or from high stacks]: 6.25964e-14 kg
- Mercury II [air, unspecified]: 2.9495e-13 kg
- Mercury II [air, urban air close to ground]: 4.99687e-13 kg
- Methane, bromochlorodifluoro-, Halon 1211 [air, non-urban air or from high stacks]: 9.08036e-14 kg
- Methane, chlorodifluoro-, HCFC-22 [air, non-urban air or from high stacks]: 5.24537e-9 kg
- Methane, fossil [air, non-urban air or from high stacks]: 1.54469e-9 kg
- Methane, fossil [air, unspecified]: 3.01344e-11 kg
- Methane, fossil [air, urban air close to ground]: 3.21245e-8 kg
- Methane, non-fossil [air, non-urban air or from high stacks]: 1.60733e-8 kg
- Methane, non-fossil [air, unspecified]: 9.09833e-11 kg
- Methane, non-fossil [air, urban air close to ground]: 1.51408e-10 kg
- Methanol [air, unspecified]: 6.20465e-14 kg
- Methanol [air, urban air close to ground]: 1.63101e-9 kg
- Molybdenum VI [air, unspecified]: 4.3977e-15 kg
- Molybdenum VI [air, urban air close to ground]: 2.55565e-11 kg
- NMVOC, non-methane volatile organic compounds [air, non-urban air or from high stacks]: 4.81882e-8 kg
- NMVOC, non-methane volatile organic compounds [air, unspecified]: 3.8392e-6 kg
- NMVOC, non-methane volatile organic compounds [air, urban air close to ground]: 2.02505e-7 kg
- Nickel II [air, non-urban air or from high stacks]: 2.19791e-13 kg
- Nickel II [air, unspecified]: 3.09856e-9 kg
- Nickel II [air, urban air close to ground]: 9.07617e-10 kg
- Nitrogen [air, unspecified]: 2.70869e-6 kg
- Nitrogen oxides [air, non-urban air or from high stacks]: 3.21175e-7 kg
- Nitrogen oxides [air, unspecified]: 3.25109e-7 kg
- Nitrogen oxides [air, urban air close to ground]: 8.6252e-7 kg
- PAH, polycyclic aromatic hydrocarbons [air, unspecified]: 7.91244e-11 kg
- PAH, polycyclic aromatic hydrocarbons [air, urban air close to ground]: 8.3527e-12 kg
- Particulate Matter, < 2.5 um [air, non-urban air or from high stacks]: 3.46704e-8 kg
- Particulate Matter, < 2.5 um [air, unspecified]: 2.30473e-7 kg
- Particulate Matter, < 2.5 um [air, urban air close to ground]: 2.83649e-8 kg
- Particulate Matter, > 10 um [air, non-urban air or from high stacks]: 7.86167e-10 kg
- Particulate Matter, > 10 um [air, unspecified]: 3.90642e-7 kg
- Particulate Matter, > 10 um [air, urban air close to ground]: 2.03305e-8 kg
- Particulate Matter, > 2.5 um and < 10um [air, non-urban air or from high stacks]: 1.15486e-9 kg
- Particulate Matter, > 2.5 um and < 10um [air, unspecified]: 3.91112e-7 kg
- Particulate Matter, > 2.5 um and < 10um [air, urban air close to ground]: 1.9019e-8 kg
- Pentane [air, unspecified]: 1.46979e-12 kg
- Pentane [air, urban air close to ground]: 2.61849e-11 kg
- Phenol [air, unspecified]: 1.16783e-9 kg
- Phenol [air, urban air close to ground]: 4.55351e-14 kg
- Phenol, pentachloro- [air, unspecified]: 3.86353e-16 kg
- Phenol, pentachloro- [air, urban air close to ground]: 6.36722e-16 kg
- Phosphoric acid [air, non-urban air or from high stacks]: 4.6977e-16 kg
- Phosphorus [air, unspecified]: 1.43249e-11 kg
- Phosphorus [air, urban air close to ground]: 2.35939e-11 kg
- Platinum [air, non-urban air or from high stacks]: 4.62616e-15 kg
- Platinum [air, urban air close to ground]: 6.29121e-16 kg
- Polonium-210 [air, unspecified]: 2.31059e-11 kBq
- Polonium-210 [air, urban air close to ground]: 1.3605e-11 kBq
- Potassium I [air, unspecified]: 1.11648e-9 kg
- Potassium I [air, urban air close to ground]: 1.83961e-9 kg
- Potassium-40 [air, unspecified]: 3.66492e-12 kBq
- Potassium-40 [air, urban air close to ground]: 2.03276e-12 kBq
- Propane [air, non-urban air or from high stacks]: 5.77657e-12 kg
- Propane [air, unspecified]: 5.56807e-13 kg
- Propane [air, urban air close to ground]: 1.6837e-10 kg
- Propanol [air, urban air close to ground]: 1.98497e-7 kg
- Propene [air, unspecified]: 1.50824e-13 kg
- Propene [air, urban air close to ground]: 4.74309e-13 kg
- Propionic acid [air, unspecified]: 2.42105e-14 kg
- Propionic acid [air, urban air close to ground]: 4.36017e-13 kg
- Radium-226 [air, unspecified]: 3.26168e-12 kBq
- Radium-226 [air, urban air close to ground]: 1.91214e-12 kBq
- Radium-228 [air, unspecified]: 1.73986e-11 kBq
- Radium-228 [air, urban air close to ground]: 3.24786e-12 kBq
- Radon-220 [air, unspecified]: 2.80989e-13 kBq
- Radon-220 [air, urban air close to ground]: 4.02198e-13 kBq
- Radon-222 [air, unspecified]: 2.80989e-13 kBq
- Radon-222 [air, urban air close to ground]: 4.02198e-13 kBq
- Scandium [air, unspecified]: 3.38868e-16 kg
- Scandium [air, urban air close to ground]: 1.05333e-16 kg
- Selenium IV [air, non-urban air or from high stacks]: 3.13604e-14 kg
- Selenium IV [air, unspecified]: 2.38571e-13 kg
- Selenium IV [air, urban air close to ground]: 1.68312e-11 kg
- Silicon [air, unspecified]: 4.63865e-12 kg
- Silicon [air, urban air close to ground]: 1.16186e-11 kg
- Sodium [air, unspecified]: 6.22801e-11 kg
- Sodium [air, urban air close to ground]: 1.05157e-9 kg
- Strontium [air, unspecified]: 5.16835e-14 kg
- Strontium [air, urban air close to ground]: 3.1338e-14 kg
- Sulfate [air, unspecified]: 1.11416e-9 kg
- Sulfur dioxide [air, non-urban air or from high stacks]: 1.62405e-8 kg
- Sulfur dioxide [air, unspecified]: 5.7309e-8 kg
- Sulfur dioxide [air, urban air close to ground]: 1.37373e-6 kg
- Sulfur hexafluoride [air, unspecified]: 1.06044e-12 kg
- Sulfur oxides [air, unspecified]: 1.57506e-9 kg
- Sulfuric acid [air, unspecified]: 2.28744e-10 kg
- Tetrachloroethylene [air, urban air close to ground]: 2.64472e-8 kg
- Thallium I [air, unspecified]: 4.22635e-16 kg
- Thallium I [air, urban air close to ground]: 7.13851e-17 kg
- Thorium [air, unspecified]: 5.18143e-16 kg
- Thorium [air, urban air close to ground]: 3.47986e-16 kg
- Thorium-228 [air, unspecified]: 1.49517e-12 kBq
- Thorium-228 [air, urban air close to ground]: 8.82467e-13 kBq
- Thorium-232 [air, unspecified]: 9.51094e-13 kBq
- Thorium-232 [air, urban air close to ground]: 5.51635e-13 kBq
- Tin ion [air, unspecified]: 1.75836e-16 kg
- Tin ion [air, urban air close to ground]: 2.07926e-16 kg
- Titanium ion [air, unspecified]: 1.02146e-13 kg
- Titanium ion [air, urban air close to ground]: 3.74116e-14 kg
- Toluene [air, unspecified]: 1.45885e-11 kg
- Toluene [air, urban air close to ground]: 2.81006e-11 kg
- Uranium [air, unspecified]: 6.93445e-16 kg
- Uranium [air, urban air close to ground]: 5.55836e-16 kg
- Uranium-238 [air, unspecified]: 2.7183e-12 kBq
- Uranium-238 [air, urban air close to ground]: 1.59952e-12 kBq
- VOC, volatile organic compounds [air, unspecified]: 5.38278e-13 kg
- Vanadium V [air, unspecified]: 1.32539e-13 kg
- Vanadium V [air, urban air close to ground]: 3.28157e-9 kg
- Water [air, non-urban air or from high stacks]: 3.80605e-9 m3
- Water [air, unspecified]: 0.000302313 m3
- Water [air, urban air close to ground]: 4.46638e-7 m3
- Xylene [air, unspecified]: 3.80845e-14 kg
- Xylene [air, urban air close to ground]: 3.04323e-13 kg
- Zinc II [air, non-urban air or from high stacks]: 3.13604e-12 kg
- Zinc II [air, unspecified]: 4.09844e-10 kg
- Zinc II [air, urban air close to ground]: 1.04413e-10 kg
- m-Xylene [air, unspecified]: 5.72375e-12 kg
- m-Xylene [air, urban air close to ground]: 9.43292e-12 kg
- Boron [soil, unspecified]: 7.71072e-12 kg
- Copper ion [soil, unspecified]: 2.71999e-11 kg
- Fluoride [soil, unspecified]: 2.9487e-11 kg
- Iron ion [soil, unspecified]: 3.815e-8 kg
- Oils, non-fossil [soil, forestry]: 5.72192e-9 kg
- Oils, unspecified [soil, unspecified]: 1.18795e-7 kg
- Sulfur [soil, industrial]: 1.22009e-7 kg
- AOX, Adsorbable Organic Halogen [water, surface water]: 8.20357e-10 kg
- AOX, Adsorbable Organic Halogen [water, unspecified]: 1.45717e-19 kg
- Acidity, unspecified [water, surface water]: 2.56624e-12 kg
- Aluminium III [water, surface water]: 2.56536e-12 kg
- Aluminium III [water, unspecified]: 2.74121e-8 kg
- Ammonium [water, ocean]: 3.69187e-11 kg
- Ammonium [water, surface water]: 1.61174e-10 kg
- Ammonium [water, unspecified]: 1.49344e-15 kg
- Antimony ion [water, surface water]: 6.25884e-12 kg
- Arsenic ion [water, ocean]: 8.25905e-13 kg
- Arsenic ion [water, surface water]: 1.38418e-12 kg
- BOD5, Biological Oxygen Demand [water, surface water]: 8.38578e-9 kg
- BOD5, Biological Oxygen Demand [water, unspecified]: 1.25982e-6 kg
- COD, Chemical Oxygen Demand [water, ocean]: 7.87445e-11 kg
- COD, Chemical Oxygen Demand [water, surface water]: 1.02234e-7 kg
- COD, Chemical Oxygen Demand [water, unspecified]: 1.34234e-6 kg
- Cadmium II [water, ocean]: 6.71665e-13 kg
- Cadmium II [water, surface water]: 1.7034e-12 kg
- Cadmium II [water, unspecified]: 4.46024e-9 kg
- Calcium II [water, surface water]: 4.06345e-10 kg
- Chloride [water, surface water]: 7.74751e-8 kg
- Chloride [water, unspecified]: 1.70238e-5 kg
- Chromium III [water, surface water]: 9.50505e-12 kg
- Chromium III [water, unspecified]: 1.60797e-8 kg
- Chromium VI [water, surface water]: 2.83167e-15 kg
- Chromium VI [water, unspecified]: 8.93317e-10 kg
- Cobalt II [water, surface water]: 7.471e-13 kg
- Copper ion [water, ocean]: 2.61712e-13 kg
- Copper ion [water, surface water]: 1.02864e-11 kg
- Copper ion [water, unspecified]: 8.64162e-9 kg
- Cyanide [water, ocean]: 2.04531e-14 kg
- Cyanide [water, surface water]: 8.68191e-15 kg
- DOC, Dissolved Organic Carbon [water, surface water]: 7.24195e-8 kg
- DOC, Dissolved Organic Carbon [water, unspecified]: 3.94446e-7 kg
- Discarded fish, demersal, to ocean [water, ocean]: 4.41615e-7 kg
- Discarded fish, pelagic, to ocean [water, ocean]: 1.22297e-6 kg
- Dissolved solids [water, surface water]: 2.53081e-11 kg
- Fluoride [water, ocean]: 3.21712e-11 kg
- Fluoride [water, surface water]: 6.76668e-10 kg
- Hydrocarbons, unspecified [water, surface water]: 1.15752e-10 kg
- Hydrocarbons, unspecified [water, unspecified]: 5.62384e-8 kg
- Hypochlorite [water, ocean]: 1.09455e-9 kg
- Hypochlorite [water, surface water]: 1.1172e-9 kg
- Iron ion [water, ocean]: 3.54222e-12 kg
- Iron ion [water, surface water]: 4.07727e-10 kg
- Iron ion [water, unspecified]: 7.4559e-6 kg
- Lead II [water, ocean]: 4.70776e-13 kg
- Lead II [water, surface water]: 1.94381e-11 kg
- Lead II [water, unspecified]: 8.93317e-9 kg
- Magnesium [water, surface water]: 9.981e-10 kg
- Manganese II [water, surface water]: 1.08125e-10 kg
- Manganese II [water, unspecified]: 1.82216e-8 kg
- Mercury II [water, ocean]: 7.41214e-14 kg
- Mercury II [water, surface water]: 4.88206e-13 kg
- Mercury II [water, unspecified]: 8.93317e-10 kg
- Methanol [water, unspecified]: 6.33962e-14 kg
- Nickel II [water, ocean]: 6.77189e-14 kg
- Nickel II [water, surface water]: 5.53841e-11 kg
- Nickel II [water, unspecified]: 2.52696e-8 kg
- Nitrate [water, ocean]: 4.60195e-12 kg
- Nitrate [water, surface water]: 2.2857e-10 kg
- Nitrogen [water, ocean]: 8.93941e-11 kg
- Nitrogen [water, surface water]: 2.64962e-8 kg
- Nitrogen [water, unspecified]: 6.44486e-9 kg
- Nitrogen dioxide [water, surface water]: 2.60457e-13 kg
- Oils, unspecified [water, surface water]: 1.76777e-10 kg
- Oils, unspecified [water, unspecified]: 1.41459e-14 kg
- Phenol [water, surface water]: 1.56274e-14 kg
- Phenol [water, unspecified]: 7.4593e-16 kg
- Phosphate [water, unspecified]: 9.31866e-14 kg
- Phosphorus [water, surface water]: 1.49264e-10 kg
- Phosphorus [water, unspecified]: 1.28307e-9 kg
- Selenium IV [water, surface water]: 2.83097e-13 kg
- Sodium I [water, surface water]: 1.596e-9 kg
- Sulfate [water, surface water]: 6.3164e-7 kg
- Sulfate [water, unspecified]: 1.08929e-7 kg
- Sulfide [water, surface water]: 1.67693e-10 kg
- Sulfite [water, surface water]: 5.62639e-9 kg
- Sulfur [water, unspecified]: 3.78485e-17 kg
- Sulfuric acid [water, surface water]: 7.29732e-9 kg
- Suspended solids, unspecified [water, surface water]: 1.27568e-8 kg
- Suspended solids, unspecified [water, unspecified]: 4.74223e-6 kg
- TOC, Total Organic Carbon [water, surface water]: 7.53151e-8 kg
- TOC, Total Organic Carbon [water, unspecified]: 3.94446e-7 kg
- Thallium I [water, ocean]: 2.11855e-13 kg
- Thallium I [water, surface water]: 1.15518e-11 kg
- Tin ion [water, surface water]: 3.7265e-13 kg
- Triethylene glycol [water, unspecified]: 1.90819e-13 kg
- Vanadium V [water, surface water]: 1.13543e-10 kg
- Water [water, surface water]: 2.38395e-9 m3
- Water [water, unspecified]: 0.00235706 m3
- Zinc II [water, ocean]: 1.83323e-11 kg
- Zinc II [water, surface water]: 5.34495e-11 kg
- Zinc II [water, unspecified]: 6.68726e-9 kg

## Sampling procedure
The 2 Swiss HWI plants, used as the inventory reference technology mix, have a total annual capacity of 53'000 tons of hazardous waste. This corresponds to 39% of the Swiss total installed capacity in 2000. Swiss average plants size is 20'000 t/a.

## Extrapolations
Available waste composition data. Transfer coefficients from one modern HWI completed with data from MSWI. Waste-specific auxiliary material consumption adapted from MSWI.
