# treatment of precious metal from electronics scrap, in anode slime, precious metal extraction

Dataset: EcoSpold 2, unit process
Geography: RoW
Time period: 2000-01-01 to 2022-12-31
Technology level: current
Classification: ISIC rev.4 ecoinvent: 2420:Manufacture of basic precious and other non-ferrous metals
Classification: EcoSpold01Categories: metals/extraction
Tags: ConvertedDataset
Scenario: Business-as-Usual
System model: Allocation at the point of substitution
Generated by: Mischa Classen
Published in: Classen M. 2009
Database: ecoinvent
isCopyrightProtected: true

## General comment
The multi-output-process "precious metal refining, secondary copper" delivers the co-products "silver, secondary, at precious metal refinery", "gold, secondary, at precious metal refinery" and "palladium, secondary, at precious metal refinery". The flows "silver, …" and "gold, …" are part of the global supply mix of gold and silver modelled in this part. The by-product "palladium, …" receives its part of the burdens, but it is not aimed to be used by the data-user.
[This dataset was already contained in the ecoinvent database version 2. It was not individually updated during the transfer to ecoinvent version 3. Life Cycle Impact Assessment results may still have changed, as they are affected by changes in the supply chain, i.e. in other datasets. This dataset was generated following the ecoinvent quality guidelines for version 2. It may have been subject to central changes described in the ecoinvent version 3 change report (http://www.ecoinvent.org/database/ecoinvent-version-3/reports-of-changes/), and the results of the central updates were reviewed extensively. The changes added e.g. consistent water flows and other information throughout the database. The documentation of this dataset can be found in the ecoinvent reports of version 2, which are still available via the ecoinvent website. The change report linked above covers all central changes that were made during the conversion process.]

## Included activities end
Inculdes the refining of gold and silver.

## Geography
Data describes a Swedish plant that is singular in the region and ranges worldwide among the big producer. It may be taken as approximation for the global situation

## Technology
Anode slime treatment by pressure leaching and top blown rotary converter. Production of Silver by Möbius Electrolysis, Gold by Wohlwill electrolysis, Palladium to further processing

## Reference product
- gold: 1 kg; name gold_byP; By-product classification allocatable product; CPC 41320: Gold (including gold plated with platinum), unwrought or in semi-manufactured forms, or in powder form; CAS 7440-57-5
  EcoSpold01Location=SE
  production volume 14248.1 kg
    Calculated in relation to the production volume of the reference product.
  property price 25128.4 EUR2005
    Price calculated as 5-year market average (2015-2019; USD/kg; USGS [2020]) and converted to EUR2005 (USD2019/EUR2005 exchange rate: 0.62; Official Data Foundation [2020] and Macrotrends [2020]).
    References:
    Official Data Foundation (2020). Inflation Calculator [Online]. Available from: https://www.officialdata.org/us/inflation/2005?endYear=2019&amount=1 [Accessed 28/07/2020]
    USGS (2020). Mineral Commodity Summaries 2020 [Online]. Available from: https://pubs.usgs.gov/periodicals/mcs2020/mcs2020.pdf [Accessed 28/07/2020]
    Macrotrends (2020). Euro Dollar Exchange Rate (EUR USD) - Historical Chart [Online]. Available from: https://www.macrotrends.net/2548/euro-dollar-exchange-rate-historical-chart [Accessed 28/07/2020]
  properties: carbon allocation 0 kg, carbon content 0, carbon content, fossil 0, carbon content, non-fossil 0, dry mass 1 kg, water content 0, water in wet mass 0 kg, wet mass 1 kg

## Inputs from technosphere
- EDTA, ethylenediaminetetraacetic acid: 2.04486 kg
- acrylonitrile-butadiene-styrene copolymer: 30.2587 kg
- adipic acid: 0.000272223 kg
- air compressor, screw-type compressor, 4kW: 0.0136759 unit
- air distribution terminal panel, steel, 120 m3/h: 3.91565e-6 unit
- air filter, decentralized unit, 180-250 m3/h: 3.91565e-6 unit
- air filter, in exhaust air valve: 5.87348e-6 unit
- alkyd paint, white, without solvent, in 60% solution state: 2.33997e-5, 0.0142167 kg (2 suppliers, which the file names only by identifier); sum of these 0.0142401 kg
- alkyd paint, white, without water, in 60% solution state: 0.00220021, 0.0104447 kg (2 suppliers, which the file names only by identifier); sum of these 0.0126449 kg
- aluminium scrap, post-consumer: -0.379719 kg
- aluminium scrap, post-consumer, prepared for melting: -1.1742e-6 kg
- aluminium sulfate, powder: 3.20492, 0.868387 kg (2 suppliers, which the file names only by identifier); sum of these 4.07331 kg
- aluminium, cast alloy: 3.47658 kg
- aluminium, wrought alloy: 12.7987 kg
- ammonia, anhydrous, liquid: 1.22553e-7, 1.28448e-8, 7.48656e-7, 1.25087e-7, 4.72071e-7, 6.31323e-8, 5.74212e-8, 1.35842e-6, 4.05802e-8 kg (9 suppliers, which the file names only by identifier); sum of these 3.00076e-6 kg
- average incineration residue: -0.0429233 kg
- bark chips, wet, measured as dry mass: 0.453791, 159.635, 13.1309, 0.180135 kg (4 suppliers, which the file names only by identifier); sum of these 173.399 kg
- battery, Li-ion, LiMn2O4, rechargeable, prismatic: 0.423187 kg
- battery, Li-ion, NCA, rechargeable, prismatic: 6.97801 kg
- biogas: 21.0105, 6.23416 m3 (2 suppliers, which the file names only by identifier); sum of these 27.2447 m3
- blower and heat exchange unit, decentralized, 180-250 m3/h: 1.95783e-6 unit
- brass: 0.119304, 0.00059952 kg (2 suppliers, which the file names only by identifier); sum of these 0.119904 kg
- building, hall: 0.0913266 m2
- building, hall, steel construction: 0.0282129, 1.84045e-9 m2 (2 suppliers, which the file names only by identifier); sum of these 0.0282129 m2
- building, multi-storey: 0.0419674, 0.0134114 m3 (2 suppliers, which the file names only by identifier); sum of these 0.0553788 m3
- cable, connector for computer, without plugs: 93.173 m
- cable, data cable in infrastructure: 0.325625 m
- cable, network cable, category 5, without plugs: 1.91587e-6 m
- cable, printer cable, without plugs: 79.7103 m
- cable, ribbon cable, 20-pin, with plugs: 0.0165336 kg
- cable, three-conductor cable: 1.21902 m
- cable, unspecified: 1.5177 kg
- calcium carbonate, precipitated: 2.31943, 6.98946 kg (2 suppliers, which the file names only by identifier); sum of these 9.30889 kg
- capacitor, electrolyte type, < 2cm height: 6.36339 kg
- capacitor, electrolyte type, > 2cm height: 4.71731e-6 kg
- capacitor, film type, for through-hole mounting: 6.28495e-6 kg
- capacitor, for surface-mounting: 0.289245 kg
- capacitor, tantalum-, for through-hole mounting: 4.22829e-7 kg
- carbon dioxide, liquid: 0.0395534, 0.0083261 kg (2 suppliers, which the file names only by identifier); sum of these 0.0478795 kg
- cast iron: 2.12848 kg
- casting, brass: 0.0128694 kg
- ceramic tile: 1.04585 kg
- charger, electric passenger car: 0.0118451 kg
- charger, for electric scooter: 1.2185 kg
- chemical factory: 2.40608, 1.18827 kg (2 suppliers, which the file names only by identifier); sum of these 3.59435 kg
- chemical, inorganic: 0.650581 kg
- chemical, organic: 2.84642 kg
- chlorine dioxide: 25.1022, 7.43326 kg (2 suppliers, which the file names only by identifier); sum of these 32.5355 kg
- clay brick: 0.0253057 kg
- coal slurry: -0.00107455 kg
- concrete, medium strength: 0.00754705 m3
- concrete, normal strength: 0.000328842, 0.000155773, 4.697e-5, 0.000693023, 7.22121e-5, 0.0281559, 0.000584608, 0.0247921, 0.000505092, 0.000244275 m3 (10 suppliers, which the file names only by identifier); sum of these 0.0555788 m3
- controller, for electric scooter: 0.511568 kg
- converter, for electric passenger car: 0.00859726 kg
- copper scrap, sorted, pressed: -0.0186867 kg
- copper, cathode: 21.1909 kg
- corrugated board box: 13.5348, 31.4156, 12.2912, 0.504172 kg (4 suppliers, which the file names only by identifier); sum of these 57.7458 kg
- decommissioned chemical production facilities: -3.59484 kg
- diesel, burned in building machine: 33.6669 MJ
- digester sludge: -9.98388 kg
- diode, glass-, for surface-mounting: 3.76018 kg
- diode, glass-, for through-hole mounting: 8.6772e-7 kg
- disk drive, CD/DVD, ROM, for desktop computer: 3.61942e-7 unit
- dithiocarbamate-compound: 0.0321576 kg
- drawing of pipe, steel: 2.38123, 0.000465603 kg (2 suppliers, which the file names only by identifier); sum of these 2.3817 kg
- electric connector, peripheral type buss: 0.170698 kg
- electric connector, wire clamp: 0.000156247 kg
- electric motor, electric passenger car: 0.101257 kg
- electric motor, for electric scooter: 2.3363 kg
- electricity, high voltage: 0.232039, 9.53827, 37.2917, 71.5271, 3.95007, 1.18532, 7.88647, 14.0994, 0.800121 kWh (9 suppliers, which the file names only by identifier); sum of these 146.51 kWh
- electricity, low voltage: 0.570105, 1.12982, 10.8531, 0.193603, 3.87886, 0.0352075, 0.00246156, 2.68867, 0.791746 kWh (9 suppliers, which the file names only by identifier); sum of these 20.1435 kWh
- electricity, medium voltage: 4996.98, 0.2681, 1.79059, 4.84012, 1.51384, 0.0533236, 0.272079, 5.36589e-7, 0.405074, 16.4288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 kWh (13 suppliers, which the file names only by identifier); sum of these 5023.73 kWh
- electronic component machinery, unspecified: 1.86071e-5 unit
- electronic component, passive, mobile, earpiece and speaker: 0.164636 kg
- electronic component, passive, unspecified: 0.757394 kg
- electronics scrap: -1.76353 kg
- electronics scrap from control units: -1.11407 kg
- electronics, for control units: 1.83118 kg
- energy and auxilliary inputs, metal working factory: 6.11621e-8, 1.3639e-8 kg (2 suppliers, which the file names only by identifier); sum of these 7.48011e-8 kg
- epoxy resin, liquid: 1.56502, 0.329677 kg (2 suppliers, which the file names only by identifier); sum of these 1.89469 kg
- ethylene glycol: 0.000360386 kg
- excavation, hydraulic digger: 0.177368 m3
- exhaust air outlet, steel/aluminium, 85x365 mm: 3.91565e-6 unit
- exhaust air valve, in-wall housing, plastic/steel, DN 125: 5.87348e-6 unit
- extrusion, plastic pipes: 3.84563 kg
- fan, for power supply unit, desktop computer: 0.174738 kg
- fatty alcohol: 0.359671 kg
- ferrite: 1.1585 kg
- flat glass, coated: 0.345361, 0.699312 kg (2 suppliers, which the file names only by identifier); sum of these 1.04467 kg
- flat glass, uncoated: 0.0108136, 0.0525118 kg (2 suppliers, which the file names only by identifier); sum of these 0.0633254 kg
- fleece, polyethylene: 2.21192e-6 kg
- flexible duct, aluminium/PET, DN of 125: 3.26304e-6 m
- glass fibre: 0.769335 kg
- glass fibre reinforced plastic, polyamide, injection moulded: 1.53459 kg
- glass fibre reinforced plastic, polyester resin, hand lay-up: 0.0697614 kg
- glass from used cathode ray tube: -7.64572e-6 kg
- glass wool mat: 1.36957 kg
- green liquor dregs: -58.7317 kg
- hard coal: 0.08169, 0.108393, 0.0491492, 0.190854, 0.347841, 0.0501556, 0.0153274, 0.0213292, 0.0116627 kg (9 suppliers, which the file names only by identifier); sum of these 0.876402 kg
- hard disk drive, for desktop computer: 3.61942e-7 unit
- hazardous waste, for incineration: -0.594029, -0.199999, -0.00522784 kg (3 suppliers, which the file names only by identifier); sum of these -0.799255 kg
- heat carrier liquid, 40% C3H8O2: -3.89925e-9, -1.17297e-8 m3 (2 suppliers, which the file names only by identifier); sum of these -1.5629e-8 m3
- heat, central or small-scale, other than natural gas: 58.8914, 0.00735122, 0.808878 MJ (3 suppliers, which the file names only by identifier); sum of these 59.7076 MJ
- heat, district or industrial, natural gas: 31.857, 20.394, 7.52328e-6, 73.5071, 1.20791, 9.3842e-6 MJ (6 suppliers, which the file names only by identifier); sum of these 126.966 MJ
- heat, district or industrial, other than natural gas: 134.315, 33.3024, 0.00274064 MJ (3 suppliers, which the file names only by identifier); sum of these 167.62 MJ
- heavy fuel oil: 40.1011, 0.337433, 1.71545, 2.22434, 0.432877, 0.57947, 7.10072 kg (7 suppliers, which the file names only by identifier); sum of these 52.4914 kg
- hot rolling, steel: 1.36111e-8 kg
- hydrazine: 0.00401307 kg
- hydrochloric acid, without water, in 30% solution state: 0.269787, 0.65018 kg (2 suppliers, which the file names only by identifier); sum of these 0.919968 kg
- hydrogen peroxide, without water, in 50% solution state: 35.2832, 11.6262 kg (2 suppliers, which the file names only by identifier); sum of these 46.9094 kg
- inductor, miniature radio frequency chip: 0.00540693 kg
- inductor, ring core choke type: 71.7327 kg
- industrial furnace, 1MW, oil: 2.4783e-7 unit
- inert waste, for final disposal: -0.000235606, -3.18997 kg (2 suppliers, which the file names only by identifier); sum of these -3.19021 kg
- injection moulding: 196.566, 7.59331e-5 kg (2 suppliers, which the file names only by identifier); sum of these 196.566 kg
- integrated circuit, logic type: 0.381366 kg
- integrated circuit, memory type: 0.0996133 kg
- inverter, for electric passenger car: 0.0181498 kg
- iron-nickel-chromium alloy: 0.0465035 kg
- light fuel oil: 0.910119, 0.0903366, 0.00868599, 0.413229, 0.00645513, 0.00599462, 0.0447601 kg (7 suppliers, which the file names only by identifier); sum of these 1.47958 kg
- lime: 3.20521 kg
- limestone residue: -14.4503, -38.1794 kg (2 suppliers, which the file names only by identifier); sum of these -52.6297 kg
- liquid crystal display, unmounted, mobile device: 8.05128 kg
- lubricating oil: 4.07525, 0.854689 kg (2 suppliers, which the file names only by identifier); sum of these 4.92994 kg
- machine, for treatment of waste electric and electronic equipment: 9.79432e-7 unit
- magnesium: 3.42754 kg
- magnesium sulfate: 8.45155 kg
- magnesium-alloy, AZ91, diecast: 3.98648 kg
- maintenance, refrigeration machine: 0.0330108 unit
- malusil: 14.9753 kg
- manganese: 0.00594362 kg
- medium density fibreboard: 0.000593377, 0.00380026 m3 (2 suppliers, which the file names only by identifier); sum of these 0.00439364 m3
- metal working factory: 7.48041e-8, 1.48144e-12 unit (2 suppliers, which the file names only by identifier); sum of these 7.48056e-8 unit
- metal working, average for aluminium product manufacturing: 8.27612 kg
- metal working, average for chromium steel product manufacturing: 9.71811e-7, 0.00703989 kg (2 suppliers, which the file names only by identifier); sum of these 0.00704086 kg
- metal working, average for copper product manufacturing: 9.05235 kg
- metal working, average for steel product manufacturing: 11.5537 kg
- methanol: 4.1002 kg
- methanol, from biomass: 4.21928, 11.6406 kg (2 suppliers, which the file names only by identifier); sum of these 15.8599 kg
- mounting, surface mount technology, Pb-free solder: 2.21814 m2
- municipal solid waste: -0.0103046, -3.27652, -0.00417639, -8.20275, -0.00292247 kg (5 suppliers, which the file names only by identifier); sum of these -11.4967 kg
- natural gas, high pressure: 0.582947, 0.246064, 1.40927, 0.418219, 23.659, 2.41813, 0.263959, 0.00778905, 0.937278, 0.984254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 m3 (26 suppliers, which the file names only by identifier); sum of these 87.4333 m3
- nylon 6: 0.00281596, 3.88724e-7 kg (2 suppliers, which the file names only by identifier); sum of these 0.00281634 kg
- oxygen, liquid: 27.6179, 89.1898 kg (2 suppliers, which the file names only by identifier); sum of these 116.808 kg
- ozone, liquid: 0.0506857, 0.0213327 kg (2 suppliers, which the file names only by identifier); sum of these 0.0720184 kg
- packaging film, low density polyethylene: 1.55878 kg
- paper machine: 2.92663e-8, 5.92605e-8 unit (2 suppliers, which the file names only by identifier); sum of these 8.85267e-8 unit
- peat: 5.27406, 1.24778 kg (2 suppliers, which the file names only by identifier); sum of these 6.52184 kg
- phosphoric acid, industrial grade, without water, in 85% solution state: 0.116346 kg
- photovoltaic cell factory: 8.42786e-7 unit
- pipeline, natural gas, low pressure distribution network: 6.10003e-6 km
- pipeline, petroleum: 3.16501e-6, 6.40874e-6 km (2 suppliers, which the file names only by identifier); sum of these 9.57375e-6 km
- plug, inlet and outlet, for computer cable: 56.9461 unit
- plug, inlet and outlet, for network cable: 1.28422e-6 unit
- plug, inlet and outlet, for printer cable: 44.2835 unit
- plywood: 0.000324367, 0.00688221 m3 (2 suppliers, which the file names only by identifier); sum of these 0.00720657 m3
- polycarbonate: 43.1787 kg
- polyethylene pipe, corrugated, DN 75: 0.000130522 m
- polyethylene terephthalate, granulate, amorphous: 0.0491539 kg
- polyethylene, high density, granulate: 3.88338 kg
- polymer foaming: 5.79107e-8 kg
- polypropylene, granulate: 0.282707 kg
- polystyrene foam slab: 11.8897 kg
- polystyrene, high impact: 125.322 kg
- polyurethane, rigid foam: 0.160522, 0.325036 kg (2 suppliers, which the file names only by identifier); sum of these 0.485558 kg
- polyvinylchloride, bulk polymerised: 12.8522 kg
- polyvinylchloride, emulsion polymerised: 0.0315557 kg
- polyvinylchloride, suspension polymerised: 0.21563 kg
- powder coat, steel: 1.43944e-7 m2
- power adapter, for laptop: 6.15939 unit
- power adapter, for smartphone: 79.7332 unit
- power distribution unit, for electric passenger car: 0.00745096 kg
- power supply unit, for desktop computer: 3.61942e-7 unit
- printed wiring board mounting facility: 6.76342e-13 unit
- printed wiring board, for surface mounting, Pb containing surface: 1.41157e-9 m2
- printed wiring board, for surface mounting, Pb free surface: 2.21814 m2
- printed wiring board, for through-hole mounting, Pb containing surface: 2.18685e-6 m2
- printed wiring board, for through-hole mounting, Pb free surface: 2.18685e-6 m2
- printed wiring board, mounted mainboard, desktop computer, Pb containing: 5.45736e-8 kg
- printed wiring board, mounted mainboard, laptop computer, Pb free: 1.39417 kg
- printed wiring board, mounted mainboard, mobile device, double-sided, Pb free: 0.27819 m2
- printed wiring board, surface mounted, unspecified, Pb containing: 8.12923e-8 kg
- printed wiring board, surface mounted, unspecified, Pb free: 0.286058 kg
- propane, burned in building machine: 3.25456 MJ
- pulp factory: 6.03574e-8, 2.11762e-7 unit (2 suppliers, which the file names only by identifier); sum of these 2.7212e-7 unit
- pulpwood, hardwood, measured as solid wood under bark: 1.76968, 7.61323 m3 (2 suppliers, which the file names only by identifier); sum of these 9.38291 m3
- pulpwood, softwood, measured as solid wood under bark: 0.0571074, 1.08504, 8.20876, 0.105004, 1.99507 m3 (5 suppliers, which the file names only by identifier); sum of these 11.451 m3
- quicklime, milled, loose: 16.2932, 54.7546 kg (2 suppliers, which the file names only by identifier); sum of these 71.0477 kg
- railway track: 0.00237224 m*year
- refractory, fireclay, packed: 3.17369 kg
- refrigerant R134a: 0.100669 kg
- reinforcing steel: 4.30627 kg
- residual softwood, wet: 0.132606, 0.031373 m3 (2 suppliers, which the file names only by identifier); sum of these 0.163979 m3
- residue from mechanical treatment, cathode ray tube display: -1.9434e-6, -2.93599e-8 kg (2 suppliers, which the file names only by identifier); sum of these -1.97276e-6 kg
- residue from mechanical treatment, liquid crystal display: -7.8126e-8, -5.17139e-6 kg (2 suppliers, which the file names only by identifier); sum of these -5.24951e-6 kg
- resistor, metal film type, through-hole mounting: 0.867735 kg
- resistor, surface-mounted: 0.867735 kg
- retention aid, for paper production: 0.00171416 kg
- road: 1.38522 m*year
- road, company, internal: 0.244459 m2*year
- room-connecting overflow element, steel, approx. 40 m3/h: 5.87348e-6 unit
- sawlog and veneer log, softwood, measured as solid wood under bark: 0.00608811 m3
- scrap aluminium: -0.722252, -0.0293381, -1.52077 kg (3 suppliers, which the file names only by identifier); sum of these -2.27236 kg
- scrap copper: -0.0733164, -1.96197, -4.13109 kg (3 suppliers, which the file names only by identifier); sum of these -6.16638 kg
- scrap steel: -0.0540407, -149.626, -48.1795 kg (3 suppliers, which the file names only by identifier); sum of these -197.859 kg
- seal, natural rubber based: 0.311231 kg
- sealing tape, aluminium/PE, 50 mm wide: 6.52609e-5 m
- section bar extrusion, aluminium: 0.00014883, 4.3695 kg (2 suppliers, which the file names only by identifier); sum of these 4.36965 kg
- sheet rolling, aluminium: 4.36716e-6, 1.91852 kg (2 suppliers, which the file names only by identifier); sum of these 1.91853 kg
- sheet rolling, chromium steel: 9.16892, 0.000102172 kg (2 suppliers, which the file names only by identifier); sum of these 9.16902 kg
- sheet rolling, copper: 2.53821 kg
- sheet rolling, steel: 0.0020652, 26.5829 kg (2 suppliers, which the file names only by identifier); sum of these 26.585 kg
- silencer, steel, DN 125: 7.8313e-6 unit
- sludge from pulp and paper production: -0.0325076, -2.93356, -20.1343 kg (3 suppliers, which the file names only by identifier); sum of these -23.1004 kg
- sodium chlorate, powder: 13.9973, 67.4154 kg (2 suppliers, which the file names only by identifier); sum of these 81.4127 kg
- sodium chloride, powder: 0.701843 kg
- sodium formate: 1.525, 0.628499 kg (2 suppliers, which the file names only by identifier); sum of these 2.1535 kg
- sodium hydrogen sulfite: 8.2274 kg
- sodium hydroxide, without water, in 50% solution state: 168.219 kg
- sodium hypochlorite, without water, in 15% solution state: 0.000695097, 0.0865907 kg (2 suppliers, which the file names only by identifier); sum of these 0.0872858 kg
- sodium sulfate, anhydrite: 0.693144, 0.286463 kg (2 suppliers, which the file names only by identifier); sum of these 0.979607 kg
- solar glass, low-iron: 2.76683e-10 kg
- solvent, organic: 0.00031432 kg
- spent antifreezer liquid: -0.000187448 kg
- spent solvent mixture: -0.00013716 kg
- spiral-seam duct, steel, DN 125: 3.91565e-6 m
- spoil from hard coal mining: -0.0990278 kg
- steel, chromium steel 18/8: 7.43353 kg
- steel, chromium steel 18/8, hot rolled: 81.1262 kg
- steel, low-alloyed: 144.068 kg
- steel, low-alloyed, hot rolled: 45.378 kg
- stone wool: 0.92781 kg
- stone wool, packed: 2.91741e-6 kg
- stretch blow moulding: 2.77215 kg
- styrene-acrylonitrile copolymer: 1.49964e-7 kg
- sugar, from sugar beet: 0.0284615 kg
- sulfur: 0.139294 kg
- sulfuric acid: 117.301, 32.9303 kg (2 suppliers, which the file names only by identifier); sum of these 150.232 kg
- supply air inlet, steel/SS, DN 75: 9.78913e-6 unit
- synthetic rubber: 1.66001 kg
- tap water: 58186, 11.8547, 0.470126, 0.877232, 135.66, 0.308398, 2.3632 kg (7 suppliers, which the file names only by identifier); sum of these 58337.5 kg
- toner module, laser printer, black/white: 22.1417 unit
- toner module, laser printer, colour: 22.1417 unit
- transformer, high voltage use: 5.95968e-6 kg
- transistor, surface-mounted: 1.15698 kg
- transistor, wired, small size, through-hole mounting: 6.99925e-7 kg
- transport, freight train: 581.804 metric ton*km
- transport, freight, inland waterways, barge: 51.2506 metric ton*km
- transport, freight, lorry >32 metric ton, EURO5: 382.267 metric ton*km
- transport, freight, sea, bulk carrier for dry goods: 867.687 metric ton*km
- transport, passenger car: 6.25585e-5, 2.0796e-5 km (2 suppliers, which the file names only by identifier); sum of these 8.33546e-5 km
- triazine-compound, unspecified: 0.0321576 kg
- tube insulation, elastomere: 3.75096e-6 kg
- urea: 0.0465883, 0.0397831 kg (2 suppliers, which the file names only by identifier); sum of these 0.0863714 kg
- used IT accessory: -172.679 kg
- used air distribution terminal panel steel, 120 m3/h: -3.23037e-8, -3.88335e-6 unit (2 suppliers, which the file names only by identifier); sum of these -3.91565e-6 unit
- used air filter decentralized unit, 180-250 m3/h: -3.23037e-8, -3.88335e-6 unit (2 suppliers, which the file names only by identifier); sum of these -3.91565e-6 unit
- used air filter in exhaust air valve: -4.84556e-8, -5.82502e-6 unit (2 suppliers, which the file names only by identifier); sum of these -5.87348e-6 unit
- used blower and heat exchange unit decentralized, 180-250 m3/h: -1.94167e-6, -1.61519e-8 unit (2 suppliers, which the file names only by identifier); sum of these -1.95783e-6 unit
- used cable: -3.06027 kg
- used desktop computer: -4.08994e-6 kg
- used diesel-electric generating set, 18.5kW: -0.0147968 unit
- used exhaust air valve in-wall housing, plastic/steel: -4.84556e-8, -5.82502e-6 unit (2 suppliers, which the file names only by identifier); sum of these -5.87348e-6 unit
- used flexible duct aluminium/PET, DN of 125: -3.23612e-6, -2.69198e-8 m (2 suppliers, which the file names only by identifier); sum of these -3.26304e-6 m
- used fluorescent lamp: -1.70374e-7 kg
- used industrial electronic device: -0.0185835, -0.0622144 kg (2 suppliers, which the file names only by identifier); sum of these -0.0807979 kg
- used laptop computer: -16.9153 kg
- used liquid crystal display module: -1.00853e-7, -6.67573e-6 kg (2 suppliers, which the file names only by identifier); sum of these -6.77659e-6 kg
- used powertrain from electric passenger car, manual dismantling: -0.153261 kg
- used powertrain, electric scooter: -4.06838 kg
- used printed wiring boards: -0.286248 kg
- used printer, laser: -259.944 kg
- used refrigeration machine, R134a as refrigerant: -0.0223709 unit
- used refrigeration machine, carbon dioxide, liquid as refrigerant: -0.0106399 unit
- used room-connecting overflow element steel, approx. 40 m3/h: -5.82502e-6, -4.84556e-8 unit (2 suppliers, which the file names only by identifier); sum of these -5.87348e-6 unit
- used sealing tape aluminium/PE, 50 mm wide: -6.47225e-5, -5.38396e-7 m (2 suppliers, which the file names only by identifier); sum of these -6.52609e-5 m
- used silencer steel, DN 125: -7.7667e-6, -6.46075e-8 unit (2 suppliers, which the file names only by identifier); sum of these -7.8313e-6 unit
- used smartphone: -10.8328 kg
- used tablet: -5.77818 kg
- used ventilation control and wiring decentralized unit: -1.94167e-6, -1.61519e-8 unit (2 suppliers, which the file names only by identifier); sum of these -1.95783e-6 unit
- ventilation control and wiring, decentralized unit: 1.95783e-6 unit
- waste aluminium: -3.69868e-7 kg
- waste bulk iron, excluding reinforcement: -2.60044e-5, -1.25054e-5, -3.20345e-7 kg (3 suppliers, which the file names only by identifier); sum of these -3.88302e-5 kg
- waste concrete: -0.00134188, -22.3641, -1.91344 kg (3 suppliers, which the file names only by identifier); sum of these -24.2789 kg
- waste concrete, not reinforced: -0.284158, -0.00301087, -3.54933 kg (3 suppliers, which the file names only by identifier); sum of these -3.8365 kg
- waste electric and electronic equipment: -0.563024 kg
- waste glass: -0.00473805, -0.0113493, -0.123137, -0.00105887, -0.233902, -0.00160795, -1.16046, -0.000257476 kg (8 suppliers, which the file names only by identifier); sum of these -1.53651 kg
- waste mineral oil: -0.0596999, -7.45636, -2.41489 kg (3 suppliers, which the file names only by identifier); sum of these -9.93094 kg
- waste mineral wool: -1.55279e-6, -7.2786e-7, -6.36758e-7 kg (3 suppliers, which the file names only by identifier); sum of these -2.91741e-6 kg
- waste mineral wool, for final disposal: -1.30684, -0.988858, -0.000308532 kg (3 suppliers, which the file names only by identifier); sum of these -2.29601 kg
- waste packaging paper: -0.162934, -0.0319157, -0.0489343, -1.52476e-10, -0.17682, -0.320451, -0.00427886, -0.0172415 kg (8 suppliers, which the file names only by identifier); sum of these -0.762576 kg
- waste paint on metal: -0.00855022, -7.25771e-5 kg (2 suppliers, which the file names only by identifier); sum of these -0.0086228 kg
- waste paint on wall: -0.00402211 kg
- waste paperboard, unsorted: -1.54e-5, -1.54e-5, -6.24067e-5 kg (3 suppliers, which the file names only by identifier); sum of these -9.32066e-5 kg
- waste plastic, consumer electronics: -1.44372e-6, -2.1811e-8 kg (2 suppliers, which the file names only by identifier); sum of these -1.46554e-6 kg
- waste plastic, industrial electronics: -0.000246095, -0.000498999 kg (2 suppliers, which the file names only by identifier); sum of these -0.000745094 kg
- waste plastic, mixture: -0.0871641, -0.000440457, -0.000971798, -0.0790884, -0.610197, -0.00582397, -0.00228426, -0.00240551 kg (8 suppliers, which the file names only by identifier); sum of these -0.788376 kg
- waste polyethylene: -0.29592, -0.0823145, -0.00775498, -2.0716, -0.0197722, -0.0001739, -0.00149534, -0.00816663, -0.00329923, -0.17945 kg (10 suppliers, which the file names only by identifier); sum of these -2.66995 kg
- waste polyethylene/polypropylene product: -0.711242, -0.280554, -0.00842 kg (3 suppliers, which the file names only by identifier); sum of these -1.00022 kg
- waste polypropylene: -7.17065e-11, -5.57418e-9, -3.25002e-11, -4.50249e-8, -1.77496e-10, -4.29736e-10, -1.68549e-10, -6.43162e-9 kg (8 suppliers, which the file names only by identifier); sum of these -5.79107e-8 kg
- waste polystyrene: -0.0336139, -8.97933, -0.0143004, -1.28266, -0.0353981, -0.00648153, -0.0857024, -1.11166 kg (8 suppliers, which the file names only by identifier); sum of these -11.5491 kg
- waste polystyrene isolation, flame-retardant: -0.0963232, -0.244193 kg (2 suppliers, which the file names only by identifier); sum of these -0.340516 kg
- waste polyvinylchloride: -0.00735028, -0.0381193, -0.0162172, -0.0401427, -0.0971894, -1.45458, -1.2629, -10.1829 kg (8 suppliers, which the file names only by identifier); sum of these -13.0994 kg
- waste reinforced concrete: -6.0371, -0.0639676, -86.1599 kg (3 suppliers, which the file names only by identifier); sum of these -92.261 kg
- waste rubber, unspecified: -0.0249577, -0.594516, -0.594515 kg (3 suppliers, which the file names only by identifier); sum of these -1.21399 kg
- waste textile, soiled: -0.00473894 kg
- waste wood, untreated: -0.0057155, -0.052442, -0.0781754, -8.35299, -0.0331719, -2.04295, -0.219571, -0.629609 kg (8 suppliers, which the file names only by identifier); sum of these -11.4146 kg
- wastewater treatment facility, capacity 1.6E8l/year: 2.02765e-7 unit
- wastewater, average: -6.21801e-8, -5.35914e-10, -1.50521e-7, -3.59927e-8 m3 (4 suppliers, which the file names only by identifier); sum of these -2.4923e-7 m3
- wastewater, unpolluted: -0.11123, -23.0011 m3 (2 suppliers, which the file names only by identifier); sum of these -23.1123 m3
- water, completely softened: 6.55074e-6, 8.43609e-6, 1.12699e-5 kg (3 suppliers, which the file names only by identifier); sum of these 2.62567e-5 kg
- welding, arc, steel: 0.466354 m
- wire drawing, copper: 0.000385517, 9.4186 kg (2 suppliers, which the file names only by identifier); sum of these 9.41898 kg
- wire drawing, steel: 0.515684 kg
- wood ash mixture, pure: -0.0321542, -1.56419, -10.4718 kg (3 suppliers, which the file names only by identifier); sum of these -12.0681 kg
- wood chips, wet, measured as dry mass: 52.2744, 1.76838, 329.233, 1846.44, 1.98883 kg (5 suppliers, which the file names only by identifier); sum of these 2231.71 kg
- wood pellet, measured as dry mass: 7.01165, 16.6595 kg (2 suppliers, which the file names only by identifier); sum of these 23.6711 kg
- zinc: 3.50575 kg
- zinc coat, coils: 7.07064e-7, 2.12699e-6 m2 (2 suppliers, which the file names only by identifier); sum of these 2.83406e-6 m2
- zinc coat, pieces: 0.844435 m2

## Inputs from nature
- Aluminium [natural resource, in ground]: 3.84035e-5 kg
- Anhydrite [natural resource, in ground]: 7.632e-5 kg
- Barium [natural resource, in ground]: 4.5207e-7 kg
- Calcite [natural resource, in ground]: 0.00264118 kg
- Chromium [natural resource, in ground]: 3.2048e-9 kg
- Clay, bentonite [natural resource, in ground]: 0.000765011 kg
- Clay, unspecified [natural resource, in ground]: 1.78928e-8 kg
- Coal, brown [natural resource, in ground]: 3.76667e-6 kg
- Coal, hard, unspecified [natural resource, in ground]: 0.481599 kg
- Copper [natural resource, in ground]: 2.59269e-5 kg
- Dolomite [natural resource, in ground]: 3.34249e-5 kg
- Energy, gross calorific value, in biomass [natural resource, biotic]: 0.923649 MJ
- Energy, potential (in hydropower reservoir), converted [natural resource, in water]: 0.693516 MJ
- Feldspar [natural resource, in ground]: 2.37096e-15 kg
- Fluorspar [natural resource, in ground]: 5.63576e-6 kg
- Gas, natural [natural resource, in ground]: 5.44348 Sm3
- Granite [natural resource, in ground]: 8.49661e-14 kg
- Gravel [natural resource, in ground]: 1.00411e-5 kg
- Iron [natural resource, in ground]: 0.00272141 kg
- Lead [natural resource, in ground]: 1.99621e-6 kg
- Magnesite [natural resource, in ground]: 6.05112e-15 kg
- Manganese [natural resource, in ground]: 3.51007e-6 kg
- Mercury [natural resource, in ground]: 7.18207e-9 kg
- Nickel [natural resource, in ground]: 4.22519e-11 kg
- Occupation, construction site [natural resource, land]: 0.122292 m2*year
- Occupation, dump site [natural resource, land]: 0.811502 m2*year
- Occupation, industrial area [natural resource, land]: 18.5703 m2*year
- Occupation, traffic area, road network [natural resource, land]: 1.90706 m2*year
- Oil, crude [natural resource, in ground]: 7.35085 kg
- Olivine [natural resource, in ground]: 2.55315e-5 kg
- Oxygen [natural resource, in air]: 9579.52 kg
- Peat [natural resource, biotic]: 0.000702046 kg
- Phosphorus [natural resource, in ground]: 1.98331e-11 kg
- Sand, unspecified [natural resource, in ground]: 0.000917094 kg
- Shale [natural resource, in ground]: 0.000216059 kg
- Sodium chloride [natural resource, in ground]: 0.00394561 kg
- Sodium nitrate [natural resource, in ground]: 1.81766e-14 kg
- Sulfur [natural resource, in ground]: 0.000645986 kg
- Sylvite [natural resource, in ground]: 9.85123e-7 kg
- Talc [natural resource, in ground]: 9.06136e-27 kg
- Titanium [natural resource, in ground]: 1.09784e-31 kg
- Transformation, from pasture, man made [natural resource, land]: 0.128794 m2
- Transformation, from unspecified [natural resource, land]: 0.341853 m2
- Transformation, to dump site, residual material landfill [natural resource, land]: 0.00811502 m2
- Transformation, to industrial area [natural resource, land]: 0.443459 m2
- Transformation, to traffic area, road network [natural resource, land]: 0.0190706 m2
- Uranium [natural resource, in ground]: 2.92474e-5 kg
- Water, cooling, unspecified natural origin [natural resource, in water]: 0.690246 m3
- Water, river [natural resource, in water]: 0.00132351 m3
- Water, salt, ocean [natural resource, in water]: 0.00464796 m3
- Water, unspecified natural origin [natural resource, in water]: 434.105 m3
- Water, well, in ground [natural resource, in water]: 1.00524 m3
- Wood, unspecified, standing [natural resource, biotic]: 3.916e-8 m3
- Zinc [natural resource, in ground]: 8.01024e-8 kg

## Emissions to nature
- 2-Propanol [air, non-urban air or from high stacks]: 0.00345767 kg
- 4-Methyl-2-pentanone [air, non-urban air or from high stacks]: 7.5565e-5 kg
- Acetaldehyde [air, non-urban air or from high stacks]: 0.00194034 kg
- Acetaldehyde [air, urban air close to ground]: 0.000589599 kg
- Acetic acid [air, non-urban air or from high stacks]: 0.000626539 kg
- Acetic acid [air, urban air close to ground]: 0.00140966 kg
- Acetone [air, non-urban air or from high stacks]: 0.000149752 kg
- Acetone [air, urban air close to ground]: 0.000165291 kg
- Acrolein [air, non-urban air or from high stacks]: 0.000841237 kg
- Aldehydes, unspecified [air, urban air close to ground]: 2.02734e-14 kg
- Aluminium III [air, urban air close to ground]: 0.00103784 kg
- Ammonia [air, non-urban air or from high stacks]: 0.0643293 kg
- Ammonia [air, urban air close to ground]: 0.0119122 kg
- Antimony ion [air, urban air close to ground]: 1.68867e-6 kg
- Arsenic ion [air, non-urban air or from high stacks]: 1.53984e-5 kg
- Arsenic ion [air, urban air close to ground]: 2.51135e-5 kg
- Barium II [air, urban air close to ground]: 1.95824e-5 kg
- Benzene [air, non-urban air or from high stacks]: 0.00244858 kg
- Benzene [air, urban air close to ground]: 0.00873092 kg
- Benzene, ethyl- [air, non-urban air or from high stacks]: 0.000114866 kg
- Benzene, ethyl- [air, urban air close to ground]: 0.000215078 kg
- Benzene, hexachloro- [air, non-urban air or from high stacks]: 2.75676e-11 kg
- Benzene, hexachloro- [air, urban air close to ground]: 4.94933e-11 kg
- Benzo(a)pyrene [air, non-urban air or from high stacks]: 7.76304e-7 kg
- Benzo(a)pyrene [air, urban air close to ground]: 4.82409e-6 kg
- Beryllium II [air, urban air close to ground]: 1.95824e-7 kg
- Boron [air, urban air close to ground]: 0.000755084 kg
- Bromine [air, non-urban air or from high stacks]: 0.000229736 kg
- Bromine [air, urban air close to ground]: 0.000413667 kg
- Butane [air, non-urban air or from high stacks]: 0.000129102 kg
- Butane [air, urban air close to ground]: 0.00351204 kg
- Cadmium II [air, non-urban air or from high stacks]: 5.75613e-6 kg
- Cadmium II [air, urban air close to ground]: 5.35358e-6 kg
- Calcium [air, non-urban air or from high stacks]: 0.0225091 kg
- Calcium [air, urban air close to ground]: 0.0436588 kg
- Carbon dioxide, fossil [air, non-urban air or from high stacks]: 91.8269 kg
- Carbon dioxide, fossil [air, urban air close to ground]: 292.759 kg
- Carbon dioxide, non-fossil [air, non-urban air or from high stacks]: 1270.67 kg
- Carbon dioxide, non-fossil [air, urban air close to ground]: 12888.6 kg
- Carbon disulfide [air, urban air close to ground]: 1.15475e-9 kg
- Carbon monoxide, fossil [air, non-urban air or from high stacks]: 0.496897 kg
- Carbon monoxide, fossil [air, urban air close to ground]: 0.0545492 kg
- Carbon monoxide, non-fossil [air, non-urban air or from high stacks]: 23.1362 kg
- Carbon monoxide, non-fossil [air, urban air close to ground]: 3.2557 kg
- Chlorine [air, non-urban air or from high stacks]: 0.000689211 kg
- Chlorine [air, urban air close to ground]: 0.00123744 kg
- Chloroethylene [air, urban air close to ground]: 2.24847e-9 kg
- Chromium III [air, non-urban air or from high stacks]: 3.66106e-5 kg
- Chromium III [air, urban air close to ground]: 6.92114e-5 kg
- Chromium VI [air, non-urban air or from high stacks]: 1.38028e-6 kg
- Chromium VI [air, urban air close to ground]: 4.44238e-7 kg
- Cobalt II [air, non-urban air or from high stacks]: 3.2947e-5 kg
- Cobalt II [air, urban air close to ground]: 3.89132e-5 kg
- Copper ion [air, urban air close to ground]: 0.000214566 kg
- Cyanide [air, urban air close to ground]: 1.884e-17 kg
- Dinitrogen monoxide [air, non-urban air or from high stacks]: 0.0053559 kg
- Dinitrogen monoxide [air, urban air close to ground]: 0.0172844 kg
- Dioxins, measured as 2,3,7,8-tetrachlorodibenzo-p-dioxin [air, non-urban air or from high stacks]: 1.13673e-12 kg
- Dioxins, measured as 2,3,7,8-tetrachlorodibenzo-p-dioxin [air, urban air close to ground]: 2.14388e-10 kg
- Ethane [air, urban air close to ground]: 0.00101497 kg
- Ethane, 1,2-dichloro- [air, urban air close to ground]: 2.35721e-9 kg
- Ethanol [air, non-urban air or from high stacks]: 0.000299521 kg
- Ethanol [air, urban air close to ground]: 0.000330583 kg
- Ethylene [air, urban air close to ground]: 0.00207838 kg
- Ethyne [air, urban air close to ground]: 0.000338323 kg
- Fluorine [air, non-urban air or from high stacks]: 0.000191446 kg
- Fluorine [air, urban air close to ground]: 0.000343706 kg
- Formaldehyde [air, non-urban air or from high stacks]: 0.00848328 kg
- Formaldehyde [air, urban air close to ground]: 0.00195141 kg
- Hydrocarbons, aliphatic, alkanes, cyclic [air, urban air close to ground]: 5.71113e-5 kg
- Hydrocarbons, aliphatic, alkanes, unspecified [air, non-urban air or from high stacks]: 0.00408434 kg
- Hydrocarbons, aliphatic, alkanes, unspecified [air, urban air close to ground]: 0.00728392 kg
- Hydrocarbons, aliphatic, unsaturated [air, non-urban air or from high stacks]: 0.0118996 kg
- Hydrocarbons, aliphatic, unsaturated [air, urban air close to ground]: 0.021681 kg
- Hydrocarbons, aromatic [air, non-urban air or from high stacks]: 0.000149814 kg
- Hydrocarbons, aromatic [air, urban air close to ground]: 0.00032758 kg
- Hydrocarbons, chlorinated [air, urban air close to ground]: 3.90617e-8 kg
- Hydrochloric acid [air, non-urban air or from high stacks]: 0.00494459 kg
- Hydrochloric acid [air, urban air close to ground]: 0.00305357 kg
- Hydrogen [air, urban air close to ground]: 0.000230603 kg
- Hydrogen fluoride [air, non-urban air or from high stacks]: 4.79434e-5 kg
- Hydrogen fluoride [air, urban air close to ground]: 0.000101903 kg
- Hydrogen sulfide [air, non-urban air or from high stacks]: 0.000590638 kg
- Hydrogen sulfide [air, urban air close to ground]: 0.21372 kg
- Iodine [air, urban air close to ground]: 3.2463e-6 kg
- Iron ion [air, non-urban air or from high stacks]: 0.000818677 kg
- Iron ion [air, urban air close to ground]: 0.00189868 kg
- Lead II [air, non-urban air or from high stacks]: 4.51821e-5 kg
- Lead II [air, urban air close to ground]: 0.000336 kg
- Lead-210 [air, urban air close to ground]: 0.00518101 kBq
- Magnesium [air, non-urban air or from high stacks]: 0.00064223 kg
- Magnesium [air, urban air close to ground]: 0.00306173 kg
- Manganese II [air, non-urban air or from high stacks]: 0.000650917 kg
- Manganese II [air, urban air close to ground]: 0.00117078 kg
- Mercury II [air, non-urban air or from high stacks]: 9.99467e-7 kg
- Mercury II [air, urban air close to ground]: 3.22748e-6 kg
- Methane, dichloro-, HCC-30 [air, urban air close to ground]: 4.20901e-10 kg
- Methane, fossil [air, non-urban air or from high stacks]: 0.00354374 kg
- Methane, fossil [air, urban air close to ground]: 0.140357 kg
- Methane, non-fossil [air, non-urban air or from high stacks]: 0.226274 kg
- Methane, non-fossil [air, urban air close to ground]: 0.0243481 kg
- Methanol [air, non-urban air or from high stacks]: 0.097571 kg
- Methanol [air, urban air close to ground]: 0.000561991 kg
- Methyl ethyl ketone [air, non-urban air or from high stacks]: 0.000905548 kg
- Molybdenum VI [air, non-urban air or from high stacks]: 7.98731e-6 kg
- Molybdenum VI [air, urban air close to ground]: 1.18141e-5 kg
- NMVOC, non-methane volatile organic compounds [air, non-urban air or from high stacks]: 0.0410943 kg
- NMVOC, non-methane volatile organic compounds [air, urban air close to ground]: 0.067889 kg
- Nickel II [air, non-urban air or from high stacks]: 5.49109e-5 kg
- Nickel II [air, urban air close to ground]: 0.000642483 kg
- Nitrogen oxides [air, non-urban air or from high stacks]: 1.14746 kg
- Nitrogen oxides [air, urban air close to ground]: 7.69585 kg
- PAH, polycyclic aromatic hydrocarbons [air, non-urban air or from high stacks]: 0.000312574 kg
- PAH, polycyclic aromatic hydrocarbons [air, urban air close to ground]: 0.000126876 kg
- Particulate Matter, < 2.5 um [air, non-urban air or from high stacks]: 0.418402 kg
- Particulate Matter, < 2.5 um [air, unspecified]: 0.97417 kg
- Particulate Matter, < 2.5 um [air, urban air close to ground]: 0.00100419 kg
- Particulate Matter, > 10 um [air, non-urban air or from high stacks]: 0.0118039 kg
- Particulate Matter, > 10 um [air, urban air close to ground]: 0.0133052 kg
- Particulate Matter, > 2.5 um and < 10um [air, non-urban air or from high stacks]: 0.00665144 kg
- Particulate Matter, > 2.5 um and < 10um [air, unspecified]: 0.0216055 kg
- Particulate Matter, > 2.5 um and < 10um [air, urban air close to ground]: 0.00172715 kg
- Pentane [air, non-urban air or from high stacks]: 0.000220623 kg
- Pentane [air, urban air close to ground]: 0.00600069 kg
- Phenol [air, non-urban air or from high stacks]: 0.00144167 kg
- Phenol [air, urban air close to ground]: 3.26092e-5 kg
- Phenol, pentachloro- [air, non-urban air or from high stacks]: 3.10145e-8 kg
- Phenol, pentachloro- [air, urban air close to ground]: 5.56799e-8 kg
- Phosphorus [air, non-urban air or from high stacks]: 0.000700735 kg
- Phosphorus [air, urban air close to ground]: 0.00207035 kg
- Polonium-210 [air, urban air close to ground]: 0.00951415 kBq
- Potassium I [air, non-urban air or from high stacks]: 0.0895975 kg
- Potassium I [air, urban air close to ground]: 0.160983 kg
- Potassium-40 [air, urban air close to ground]: 0.00141938 kBq
- Propanal [air, non-urban air or from high stacks]: 0.000917427 kg
- Propane [air, non-urban air or from high stacks]: 6.66917e-5 kg
- Propane [air, urban air close to ground]: 0.00170892 kg
- Propanol [air, non-urban air or from high stacks]: 2.18203e-7 kg
- Propene [air, urban air close to ground]: 0.000374204 kg
- Propionic acid [air, non-urban air or from high stacks]: 3.66953e-6 kg
- Propionic acid [air, urban air close to ground]: 9.97997e-5 kg
- Radium-226 [air, urban air close to ground]: 0.00133704 kBq
- Radium-228 [air, urban air close to ground]: 0.0021509 kBq
- Radon-220 [air, urban air close to ground]: 0.000285335 kBq
- Radon-222 [air, urban air close to ground]: 0.000285335 kBq
- Scandium [air, urban air close to ground]: 7.20399e-8 kg
- Selenium IV [air, non-urban air or from high stacks]: 5.27258e-6 kg
- Selenium IV [air, urban air close to ground]: 1.83988e-5 kg
- Silicon [air, urban air close to ground]: 0.00827792 kg
- Silver I [air, urban air close to ground]: 1.40338e-10 kg
- Sodium [air, non-urban air or from high stacks]: 0.00572644 kg
- Sodium [air, urban air close to ground]: 0.00992625 kg
- Strontium [air, urban air close to ground]: 2.19306e-5 kg
- Styrene [air, urban air close to ground]: 1.34664e-6 kg
- Sulfate [air, urban air close to ground]: 2.95334e-14 kg
- Sulfur dioxide [air, non-urban air or from high stacks]: 0.0941626 kg
- Sulfur dioxide [air, urban air close to ground]: 0.814185 kg
- Sulfur oxides [air, unspecified]: 0.649189 kg
- Sulfuric acid [air, non-urban air or from high stacks]: 0.008345 kg
- Thallium I [air, urban air close to ground]: 4.68672e-8 kg
- Thorium [air, urban air close to ground]: 2.44089e-7 kg
- Thorium-228 [air, urban air close to ground]: 0.000617156 kBq
- Thorium-232 [air, urban air close to ground]: 0.000385621 kBq
- Tin ion [air, urban air close to ground]: 1.47201e-7 kg
- Titanium ion [air, urban air close to ground]: 2.57713e-5 kg
- Toluene [air, non-urban air or from high stacks]: 0.000747273 kg
- Toluene [air, urban air close to ground]: 0.00318878 kg
- Uranium [air, urban air close to ground]: 3.91241e-7 kg
- Uranium-238 [air, urban air close to ground]: 0.00111854 kBq
- Vanadium V [air, non-urban air or from high stacks]: 0.000998359 kg
- Vanadium V [air, urban air close to ground]: 0.00111154 kg
- Water [air, non-urban air or from high stacks]: 3.09813 m3
- Water [air, unspecified]: 5.66446 m3
- Xylene [air, urban air close to ground]: 0.00022918 kg
- Zinc II [air, non-urban air or from high stacks]: 0.000156976 kg
- Zinc II [air, urban air close to ground]: 0.0021659 kg
- m-Xylene [air, non-urban air or from high stacks]: 0.00101675 kg
- m-Xylene [air, urban air close to ground]: 0.000824888 kg
- 4-Methyl-2-pentanol [water, surface water]: 1.05412e-8 kg
- AOX, Adsorbable Organic Halogen [water, surface water]: 0.593892 kg
- Acidity, unspecified [water, surface water]: 1.41698e-5 kg
- Aluminium III [water, surface water]: 1.01086e-5 kg
- Ammonium [water, surface water]: 2.46904e-5 kg
- Arsenic ion [water, surface water]: 4.79812e-9 kg
- BOD5, Biological Oxygen Demand [water, surface water]: 2.58326 kg
- Benzene [water, surface water]: 8.96019e-7 kg
- Bromate [water, surface water]: 5.08134e-9 kg
- COD, Chemical Oxygen Demand [water, surface water]: 74.3656 kg
- Cadmium II [water, surface water]: 1.51518e-12 kg
- Calcium II [water, surface water]: 2.77514e-7 kg
- Carbonate [water, surface water]: 0.0010238 kg
- Chlorate [water, surface water]: 9.14779e-7 kg
- Chloride [water, surface water]: 0.000852841 kg
- Chlorinated solvents, unspecified [water, surface water]: 4.97021e-8 kg
- Chlorine [water, surface water]: 1.20168e-8 kg
- Chloroethylene [water, surface water]: 4.66112e-11 kg
- Chromium III [water, surface water]: 2.98967e-11 kg
- Copper ion [water, surface water]: 1.46493e-7 kg
- Cyanide [water, surface water]: 2.57894e-10 kg
- DOC, Dissolved Organic Carbon [water, surface water]: 26.8828 kg
- Dissolved solids [water, surface water]: 0.000201313 kg
- Ethane, 1,2-dichloro- [water, surface water]: 3.72442e-11 kg
- Fluoride [water, surface water]: 8.64198e-8 kg
- Formaldehyde [water, surface water]: 0.00155669 kg
- Hydrocarbons, unspecified [water, surface water]: 0.000141802 kg
- Hydrogen sulfide [water, surface water]: 0.00738409 kg
- Iron ion [water, surface water]: 1.16396e-7 kg
- Lead II [water, surface water]: 1.9957e-5 kg
- Magnesium [water, surface water]: 0.0139704 kg
- Manganese II [water, surface water]: 1.54363e-13 kg
- Mercury II [water, surface water]: 8.50281e-10 kg
- Methanol [water, surface water]: 0.00454392 kg
- Nickel II [water, surface water]: 3.48186e-9 kg
- Nitrate [water, surface water]: 4.19581e-5 kg
- Nitrogen [water, surface water]: 0.601212 kg
- Oils, unspecified [water, surface water]: 0.000284039 kg
- Phenol [water, surface water]: 3.40054e-6 kg
- Phosphorus [water, surface water]: 0.10377 kg
- Potassium I [water, surface water]: 3.08895e-8 kg
- Silicon [water, surface water]: 1.17752e-18 kg
- Sodium I [water, surface water]: 0.00105762 kg
- Strontium [water, surface water]: 9.57404e-11 kg
- Sulfate [water, surface water]: 0.0027468 kg
- Sulfide [water, surface water]: 2.50523e-8 kg
- Suspended solids, unspecified [water, surface water]: 4.69688 kg
- TOC, Total Organic Carbon [water, surface water]: 26.8828 kg
- Tin ion [water, surface water]: 5.60784e-14 kg
- Toluene [water, surface water]: 4.95434e-7 kg
- Water [water, surface water]: 30.1223 m3
- Water [water, unspecified]: 401.938 m3
- Zinc II [water, surface water]: 0.00199598 kg

## Sampling procedure
Literature

## Extrapolations
see Geography and Technology This dataset has been copied from an original dataset covering the geography SE. The uncertainty has been adjusted accordingly.

## Review by Roberto Dones 2007-08-22
Passed

## Review by Emilia Moreno Ruiz 2014-05-26
PV adjusted
