# planting with starter fertiliser, by no till planter

Dataset: EcoSpold 2, unit process
Geography: BR
Time period: 2012-01-01 to 2022-12-31
Technology level: current
Classification: ISIC rev.4 ecoinvent: 0161:Support activities for crop production
Classification: EcoSpold01Categories: agricultural means of production/work processes
Synonyms: precision sowing; single-seeding
Scenario: Business-as-Usual
System model: Allocation at the point of substitution
Generated by: Marília I. S. Folegatti Matsuura
Published in: Folegatti-Matsuura M. 2018
Database: ecoinvent
isCopyrightProtected: true

## General comment
This dataset represents the operation of precision seeding. Seed is not included. The dataset covers the application of seeds and starter fertiliser in the field with a tractor of 250 hp and 10771 kg coupled to an implement that weighs 16000 kg. The functional unit (FU) is one ha seeded. The operation time is 0.21 h/FU and fuel consumption around 18 liters per hour.
40 m² are occupied inside the shed. The implement can be used to fertilising besides seeding. In this case, both activities are made in the same operation.

## Included activities start
From agricultural field foreseen to be processed.

## Included activities end
The inventory takes into account the diesel fuel consumption and the amount of agricultural machinery and of the shed, which has to be attributed to the seeding operation. Also taken into consideration is the amount of emissions to the air from combustion and the emissions to soil from tyre abrasion during the work process. Seeds and fertilisers are not taken into account. Not included are dust other than from combustion. This activity ends with the transfer back to the shed and uncoupling of the implement from the tractor.

## Geography
The inventory is modelled for agricultural processes in Brazil.

## Technology
Current technology about seeding operation during agricultural processes. Fertilising can also be performed in the same operation.

## Time period
Time period of the most of the data collected for this dataset.

## Parameters
- annual employment tractor: 150 hour/year; name AET
  Tractor annual employment of a typical system from May et al. (2016) related to maize grain production in cropping system (during 4 months per year). In this case, sowing operation lasts 15 days with 10 hours of work.
- life time implement: 1500 hour; name LTI
  Life time of sowing implement according to the typical system from May et al. (2016).
- life time shed: 30 year; name LTS
  Amount for typical system from May et al. (2016).
- life time tractor: 6000 hour; name LTT
  Life time of sowing tractor according to the typical system from May et al. (2016).
- occupation_shed: 40 m2; name OS
  40 m² are occupied by the sowing equipment inside the shed according to the typical system from May et al. (2016).
- operation_time: 0.21276 hour/ha; name time
  Operation time of a typical system from May et al. (2016):
  The tractor sows the field with the efficiency of 4.7 hectare hour-1.
- weight of the implement: 10771 kg; name WI
  Weight of the implement applied. Amount for typical system from May et al. (2016).
- weight of the tractor: 16000 kg; name WT
  Weight of the tractor applied. Amount for typical system from May et al. (2016).

## Reference product
- planting with starter fertiliser, by no till planter: 1 ha; By-product classification allocatable product; CPC 86119: Other support services to crop production
  production volume 5.99441e7 ha
    Area of arable land in Brazil, according to the Municipal Agricultural Production Data of the Brazilian Institute of Geography and Statistics (SIDRA - IBGE). See more in: http://www.sidra.ibge.gov.br/.
    Permanent crops, including sugarcane, are not accounted for.
  property price 5.80832 EUR2005
    Calculated based on inputs: The price of the product has been calculated as a sum of the values of the material and energy inputs for this product. This value is therefore a rough estimation. It may underestimate the real price since there are additional expenses when producing any product. These expences can include for example labour costs, treatment of waste materials and profit for the producer. Please consider carefully whether this level of data quality is acceptable for your application.
  properties: carbon allocation 0 kg, carbon content 0

## Inputs from technosphere
- agricultural machinery, unspecified: 2.26944 kg; = WT*time/LTI; source Folegatti Matsuura M. 2017; lognormal variance with pedigree 0.302725, pedigree (2,2,3,2,1)
  EcoSpold01Location=CH
  Agriculture tractor used.
- diesel: 3.26681 kg; source Folegatti Matsuura M. 2017; lognormal variance with pedigree 0.003325, pedigree (2,2,3,2,1)
  EcoSpold01Location=CH
  Amount for typical system from May et al. (2016).
  properties: carbon content, fossil 0.865, dry mass 1 kg, heating value, net 42.8 MJ, wet mass 1 kg
  note on carbon content, fossil: C-content of diesel is 86.5% (ecoinvent v2.2 report 6_IV, Tab 3.14)
- shed: 0.0018912 m2; = OS*(time/(LTS*AET)); lognormal variance with pedigree 0.302725, pedigree (2,2,3,2,1)
  Amount for typical system from May et al. (2016):
  40 m² are occupied by the sowing equipment inside the shed which has a lifespan of 30 years or 262800 hours.
  This exchange has an activity link directly to the producing activity because the product is primarily consumed in the same geographical area where it is produced.
  EcoSpold01Location=CH
- tractor, 4-wheel, agricultural: 0.38194 kg; name tractor; = WI*time/LTT; source Folegatti Matsuura M. 2017; lognormal variance with pedigree 0.302725, pedigree (2,2,3,2,1)
  Related to the implement coupled to the tractor.
  EcoSpold01Location=CH

## Emissions to nature
All rows: source Nemecek, T. 2007
- Ammonia [air, non-urban air or from high stacks]: 6.53362e-5 kg; = diesel*0.02/1000; lognormal variance with pedigree 0.1241, pedigree (3,2,5,5,4)
  Emissions to air from diesel burning are calculated by constant emission factors. For ammonia it is 0.02 g/kg fuel consumption. See Nemececk & Kagi (2007), page 62.
- Benzene [air, non-urban air or from high stacks]: 2.38477e-5 kg; = diesel*0.0073/1000; lognormal variance with pedigree 0.1241, pedigree (3,2,5,5,4)
  Emissions to air from diesel burning are calculated by constant emission factors. For benzene it is 0.0073 g/kg fuel consumption. See Nemececk & Kagi (2007).
- Benzo(a)pyrene [air, non-urban air or from high stacks]: 9.80043e-8 kg; = diesel*0.00003/1000; lognormal variance with pedigree 0.1241, pedigree (3,2,5,5,4)
  Emissions to air from diesel burning are calculated by constant emission factors. For benzo(a)pyrene it is 0.00003 g/kg fuel consumption. See Nemececk & Kagi (2007), page 62.
- Cadmium II [air, non-urban air or from high stacks]: 3.26681e-8 kg; = diesel*0.00001/1000; lognormal variance with pedigree 0.7341, pedigree (3,2,5,5,4)
  Emissions to air from diesel burning are calculated by constant emission factors. For cadmium it is 0.00001 g/kg fuel consumption. See Nemececk & Kagi (2007).
- Carbon dioxide, fossil [air, non-urban air or from high stacks]: 10.1924 kg; = diesel*3120/1000; lognormal variance with pedigree 0.0847, pedigree (3,2,5,5,4)
  Emissions to air from diesel burning are calculated by constant emission factors. For carbon dioxide it is 3120 g/kg fuel consumption. See Nemececk & Kagi (2007).
- Carbon monoxide, fossil [air, non-urban air or from high stacks]: 0.0020425 kg; = time*9.6/1000; lognormal variance with pedigree 0.7341, pedigree (3,2,5,5,4)
  Emissions of CO, NOx and HC estimated according to "7.2.5 HC-, NOx-, CO- EMISSIONS FROM COMBUSTION" in Nemecek & Kagi (2007) with reference value of 9.6 g of CO / hour to "combine harvesting" like the equivalent operation (page 197).
- Chromium III [air, non-urban air or from high stacks]: 1.6334e-7 kg; = diesel*0.00005/1000; lognormal variance with pedigree 0.7341, pedigree (3,2,5,5,4)
  Emissions to air from diesel burning are calculated by constant emission factors. For chromium it is 0.00005 g/kg fuel consumption. See Nemececk & Kagi (2007).
- Copper ion [air, non-urban air or from high stacks]: 5.55357e-6 kg; = diesel*0.0017/1000; lognormal variance with pedigree 0.7341, pedigree (3,2,5,5,4)
  Emissions to air from diesel burning are calculated by constant emission factors. For copper it is 0.0017 g/kg fuel consumption. See Nemececk & Kagi (2007).
- Dinitrogen monoxide [air, non-urban air or from high stacks]: 0.000392017 kg; = diesel*0.12/1000; lognormal variance with pedigree 0.1241, pedigree (3,2,5,5,4)
  Emissions to air from diesel burning are calculated by constant emission factors. For dinitrogen monoxide it is 0.12 g/kg fuel consumption. See Nemececk & Kagi (2007).
- Methane, fossil [air, non-urban air or from high stacks]: 0.000421418 kg; = diesel*0.129/1000; lognormal variance with pedigree 0.1241, pedigree (3,2,5,5,4)
  Emissions to air from diesel burning are calculated by constant emission factors. For methane it is 0.129 g/kg fuel consumption. See Nemececk & Kagi (2007).
- NMVOC, non-methane volatile organic compounds [air, non-urban air or from high stacks]: 0.00095742 kg; = time*4.5/1000; lognormal variance with pedigree 0.1241, pedigree (3,2,5,5,4)
  Emissions of CO, NOx and HC estimated according to "7.2.5 HC-, NOx-, CO- EMISSIONS FROM COMBUSTION" in Nemecek & Kagi (2007) with reference value of 4.5 g of HC / hour to "combine harvesting" like the equivalent operation (page 197).
- Nickel II [air, non-urban air or from high stacks]: 2.28677e-7 kg; = diesel*0.00007/1000; lognormal variance with pedigree 0.7341, pedigree (3,2,5,5,4)
  Emissions to air from diesel burning are calculated by constant emission factors. For nickel it is 0.00007 g/kg fuel consumption. See Nemececk & Kagi (2007).
- Nitrogen oxides [air, non-urban air or from high stacks]: 0.0108508 kg; = time*51/1000; lognormal variance with pedigree 0.1241, pedigree (3,2,5,5,4)
  Emissions of CO, NOx and HC estimated according to "7.2.5 HC-, NOx-, CO- EMISSIONS FROM COMBUSTION" in Nemecek & Kagi (2007) with reference value of 51 g of NOx / hour to "combine harvesting" like the equivalent operation (page 197).
- PAH, polycyclic aromatic hydrocarbons [air, non-urban air or from high stacks]: 1.07e-5 kg; lognormal variance with pedigree 0.3841, pedigree (3,2,5,5,4)
  Emissions to air from diesel burning are calculated by constant emission factors. PAH are related to the sum of Benzoanthracene (0.00008 g/kg), Benzofluoranthracene (0.00005 g/kg), Chrysanthemum (0.0002 g/kg), Dibenzoanthracene (0.00001 g/kg), Fluoranthene (0.00045 g/kg) and Phenanthrene (0.0025 g/kg). See Nemececk & Kagi (2007), page 62.
- Particulate Matter, < 2.5 um [air, non-urban air or from high stacks]: 0.024 kg; lognormal variance with pedigree 0.3841, pedigree (3,2,5,5,4)
  Emissions of MP2,5 estimated according to "7.2.6 OTHER AIR EMISSIONS FROM COMBUSTION" in Nemecek & Kagi (2007) with emission factor for diesel and reference medium and nominal power from page 197 - to "combine harvesting" like the equivalent operation.
  Operation time of a typical system from May et al. (2016).
- Selenium IV [air, non-urban air or from high stacks]: 3.26681e-8 kg; = diesel*0.00001/1000; lognormal variance with pedigree 0.7341, pedigree (3,2,5,5,4)
  Emissions to air from diesel burning are calculated by constant emission factors. For selenium it is 0.00001 g/kg fuel consumption. See Nemececk & Kagi (2007).
- Sulfur dioxide [air, non-urban air or from high stacks]: 0.00329948 kg; = diesel*1.01/1000; lognormal variance with pedigree 0.0847, pedigree (3,2,5,5,4)
  Emissions to air from diesel burning are calculated by constant emission factors. For sulfur dioxide it is 1.01 g/kg fuel consumption. See Nemececk & Kagi (2007).
- Zinc II [air, non-urban air or from high stacks]: 3.26681e-6 kg; = diesel*0.001/1000; lognormal variance with pedigree 0.7341, pedigree (3,2,5,5,4)
  Emissions to air from diesel burning are calculated by constant emission factors. For zinc it is 0.001 g/kg fuel consumption. See Nemececk & Kagi (2007), page 62.
- Cadmium II [soil, agricultural]: 8.46989e-6 kg; = (LTT/2500)*0.0275*0.56*0.6/1000*tractor; lognormal variance with pedigree 0.1241, pedigree (3,2,5,5,4)
  Emissions of heavy metals to soil from tyre abrasion are calculated by constant emission factors. For cadmium it is 0.6 g/kg rubber. Default values were considered: life time of tyres = 2500 h; weight of one set of tyres = 0.0275 kg tyres/kg tractor; rubbed off = 0.56 kg rubber/kg tyre.
  See Nemececk & Kagi (2007), page 64.
- Lead II [soil, agricultural]: 3.67029e-5 kg; = (LTT/2500)*0.0275*0.56*2.6/1000*tractor; lognormal variance with pedigree 0.1241, pedigree (3,2,5,5,4)
  Emissions of heavy metals to soil from tyre abrasion are calculated by constant emission factors. For lead it is 2.6 g/kg rubber. Default values were considered: life time of tyres = 2500 h; weight of one set of tyres = 0.0275 kg tyres/kg tractor; rubbed off = 0.56 kg rubber/kg tyre.
  See Nemececk & Kagi (2007), page 64.
- Zinc II [soil, agricultural]: 0.000225864 kg; = (LTT/2500)*0.0275*0.56*16/1000*tractor; lognormal variance with pedigree 0.1241, pedigree (3,2,5,5,4)
  Emissions of heavy metals to soil from tyre abrasion are calculated by constant emission factors. For zinc it is 16 g/kg rubber. Default values were considered: life time of tyres = 2500 h; weight of one set of tyres = 0.0275 kg tyres/kg tractor; rubbed off = 0.56 kg rubber/kg tyre.
  See Nemececk & Kagi (2007), page 64.

## Sampling procedure
The main source of data for the inputs are projects conducted by Embrapa Milho e Sorgo (CNPMS) and Embrapa Soja (CNPSO). Data are also provided by relevant experts related to agricultural sector in Brazil.
Emissions from burning of fossil fuels are estimated according to Nemecek and Kagi (2007).

## Extrapolations
Typical system for Brazil around the year 2016, they are not statistical average processes.
