# treatment of sewage sludge, 97% water, WWT[R], WW from anaerobic digestion of whey, landfarming

Dataset: EcoSpold 2, unit process
Geography: RoW
Time period: 2000-01-01 to 2022-12-31
Technology level: current
Classification: ISIC rev.4 ecoinvent: 3821:Treatment and disposal of non-hazardous waste
Scenario: Business-as-Usual
System model: Allocation at the point of substitution
Generated by: Nikolia Stoikou
Database: ecoinvent
isCopyrightProtected: true

## General comment
The process represents the treatment of a waste (sewage sludge) that is exclusively produced from another waste treatment. Recommended use of this dataset: to be used within the specific chain of treatments for 'wastewater from anaerobic digestion of whey'. Share of biogenic carbon in the sludge: 98.34%.

## Included activities start
The activity starts with the waste being available for landfarming. Collection and transportation of the waste to this process is not included.

## Included activities end
The activity ends with the waste being treated and waste-specific emissions from the landfarming process are released to the environment (air, water and soil). The activity is considering local fate of emissions and the initial specific wastewater composition (generating the sewage sludge). Further, it includes provision of fertiliser functions for N, P, K, if present in the sludge.

## Geography
The site has mean annual temperature (MAT) of 16.743579766537 degC, mean annual precipitation (MAP) of 1250.84108527132 mm/year, mean annual actual evaporation (EAT) of 460.58904958214 mm/year. Climate will influence the local fate emissions based on the elemental composition of the sludge as well as water evaporation to air (= consumptive water use).
References: UN data, 2020. Precipitation, Environment Statistics Database, United Nations Statistics Division Available at: http://data.un.org/Data.aspx?q=precipitation&d=ENV&f=variableID%3a6;
World Bank, 2022. Surface area (sq.km), World Bank Group Available at: https://data.worldbank.org/indicator/AG.SRF.TOTL.K2;
Doka G.,2021. A model for composition-specific life cycle inventories of regionalised wastewater fates, Zurich, Switzerland. http://www.doka.ch/publications.htm

## Technology
Landfarming is the process of spreading a substrate on agricultural soil. Sewage sludge is generated in the wastewater treatment of wastewater from anaerobic digestion of whey. Spreading of liquid sewage sludge (97w% water content) on agricultural fields with mobile vacuum tanker.

## Reference product
- organic phosphorus fertiliser, as P2O5: 1 kg; By-product classification allocatable product; CPC 34659: Fertilizers n.e.c.; lognormal variance with pedigree 0.055923, pedigree (1,1,1,1,1)
  gross fertilizer function provided from sewage sludge spreading on agricultural fields.
  Uncertainty: Uncertainty calculated from upstream wastewater technosphere fate uncertainty, wastewater composition uncertainty, and treatment model uncertainty
  production volume 1.54558e7 kg
    Calculated in proportion to wastewater reference product.
  property oxygen content 0.563579
    Oxygen content (on a dry matter basis) of organic phosphorus fertiliser, as P2O5 is calculated from the molecular formula of the substance (Phosphorus).
  property phosphorus content 0.436421
    Phosphorus content (on a dry matter basis) of organic phosphorus fertiliser, as P2O5 is calculated from the molecular formula of the substance (Phosphorus).
  property price 0.241 EUR2005
    Set equal to the price of the corresponding inorganic fertiliser
  properties: carbon allocation 0 kg, carbon content 0, carbon content, fossil 0, carbon content, non-fossil 0, dry mass 1 kg, water content 0, water in wet mass 0 kg, wet mass 1 kg

## Inputs from technosphere
- aluminium scrap, post-consumer, prepared for melting: -0.00017566 kg
- aluminium, cast alloy: 0.00017566 kg
- chemical, inorganic: 0.000114318 kg
- chemical, organic: 0.000911758 kg
- concrete, 25MPa: 3.82635e-7, 0.000147117, 1.78694e-7, 6.0499e-6, 5.95342e-6 m3 (5 suppliers, which the file names only by identifier); sum of these 0.000159682 m3
- copper scrap, sorted, pressed: -0.000211907 kg
- copper, cathode: 0.000211907 kg
- electricity, medium voltage: 1.32904, 0.414705, 0.0123499, 0.0630143, 0.905418, 3.80495, 0.282054, 0.208125 kWh (8 suppliers, which the file names only by identifier); sum of these 7.01966 kWh
- excavation, hydraulic digger: 0.000468559 m3
- extrusion, plastic pipes: 0.000540921 kg
- glass fibre: 0.000337378 kg
- inert waste, for final disposal: -0.00442954 kg
- iron sulfate: 1.37572 kg
- limestone, crushed, washed: 0.00369443 kg
- pitch: 4.58164e-7, 1.31312e-5, 6.54072e-7, 5.77824e-5, 2.25838e-7, 1.02214e-5, 3.96264e-6 kg (7 suppliers, which the file names only by identifier); sum of these 8.64358e-5 kg
- polyacrylamide: 0.102843 kg
- polyethylene, high density, granulate: 0.000538132 kg
- polyethylene, low density, granulate: 2.78825e-6 kg
- reinforcing steel: 0.0136429 kg
- sewage sludge, 70% water, WWT[R], WW from anaerobic digestion of whey: -5.52637 kg
- sewage sludge, 75% water, WWT[R], WW from anaerobic digestion of whey: -4.27721 kg
- sewage sludge, 97% water, WWT[R], WW from anaerobic digestion of whey: -128.246 kg
- steel, chromium steel 18/8, hot rolled: 0.00143037 kg
- stone wool, packed: 0.000150566 kg
- synthetic rubber: 0.000161719 kg
- tap water: 2.36956e-5, 0.000987482, 3.91609e-5, 7.30722e-5, 0.0113003, 2.56891e-5, 0.00842057, 0.000196851 kg (8 suppliers, which the file names only by identifier); sum of these 0.0210668 kg
- waste bitumen: -5.83672e-5, -2.80686e-5 kg (2 suppliers, which the file names only by identifier); sum of these -8.64358e-5 kg
- waste graphical paper: -0.000951643, -0.000217659, -6.02362e-5, -5.26711e-6, -2.12235e-5, -0.00732777, -0.000394462, -3.92869e-5 kg (8 suppliers, which the file names only by identifier); sum of these -0.00901755 kg
- waste mineral wool: -0.000106779, -4.3787e-5 kg (2 suppliers, which the file names only by identifier); sum of these -0.000150566 kg
- waste plastic, mixture: -0.00100313, -5.06901e-6, -1.11839e-5, -0.00702246, -6.70252e-5, -0.000854713, -2.62884e-5, -2.76838e-5 kg (8 suppliers, which the file names only by identifier); sum of these -0.00901755 kg
- waste polyethylene/polypropylene product: -0.000387908, -0.000153013 kg (2 suppliers, which the file names only by identifier); sum of these -0.000540921 kg
- waste reinforced concrete: -0.0258264, -0.368587 kg (2 suppliers, which the file names only by identifier); sum of these -0.394413 kg
- waste reinforcement steel: -0.0136429 kg
- waste rubber, unspecified: -8.08593e-5, -8.08593e-5 kg (2 suppliers, which the file names only by identifier); sum of these -0.000161719 kg

## Inputs from nature
- Occupation, construction site [natural resource, land]: 0.000243972 m2*year
- Occupation, industrial area [natural resource, land]: 0.00292766 m2*year
- Occupation, urban/industrial fallow (non-use) [natural resource, land]: 0.00195178 m2*year
- Oxygen [natural resource, in air]: 5.77055 kg
- Transformation, from pasture, man made [natural resource, land]: 0.000121986 m2
- Transformation, to industrial area [natural resource, land]: 7.31916e-5 m2
- Transformation, to urban/industrial fallow (non-use) [natural resource, land]: 4.87944e-5 m2

## Emissions to nature
- Carbon dioxide, fossil [air, non-urban air or from high stacks]: 0.0235723 kg
- Carbon dioxide, non-fossil [air, non-urban air or from high stacks]: 5.26311 kg
- Dinitrogen monoxide [air, non-urban air or from high stacks]: 0.00168794 kg
- Heat, waste [air, non-urban air or from high stacks]: 42.2994 MJ
- Methane, fossil [air, non-urban air or from high stacks]: 4.19527e-5 kg
- Methane, non-fossil [air, non-urban air or from high stacks]: 0.00248596 kg
- Nitrogen oxides [air, non-urban air or from high stacks]: 0.00139378 kg
- Particulate Matter, < 2.5 um [air, non-urban air or from high stacks]: 3.60264e-5 kg
- Water [air, non-urban air or from high stacks]: 0.00151838 m3
- BOD5, Biological Oxygen Demand [water, surface water]: 0.496099 kg
- COD, Chemical Oxygen Demand [water, surface water]: 2.01711 kg
- Calcium II [water, surface water]: 0.664559 kg
- DOC, Dissolved Organic Carbon [water, surface water]: 0.33332 kg
- Heat, waste [water, surface water]: 36.8722 MJ
- Iron ion [water, surface water]: 0.424798 kg
- Nitrate [water, surface water]: 2.069 kg
- Phosphate [water, surface water]: 0.222328 kg
- Potassium I [water, surface water]: 1.56926 kg
- Sulfate [water, surface water]: 0.869965 kg
- TOC, Total Organic Carbon [water, surface water]: 0.545164 kg
- Water [water, surface water]: 4.43241 m3
