# treatment of sewage sludge, 75% water, WWT, WW from ammonium paratungstate production, sanitary landfill

Dataset: EcoSpold 2, unit process
Geography: CN
Time period: 1994-01-01 to 2022-12-31
Technology level: current
Classification: ISIC rev.4 ecoinvent: 3821:Treatment and disposal of non-hazardous waste
Scenario: Business-as-Usual
System model: Allocation at the point of substitution
Generated by: Nikolia Stoikou
Database: ecoinvent
isCopyrightProtected: true

## General comment
The process represents the treatment of a waste (sewage sludge) that is exclusively generated from another waste treatment. Sewage sludge is generated in the wastewater treatment of 'wastewater from ammonium paratungstate production'. Recommended use of this dataset: to be used within the specific chain of treatments for 'wastewater from ammonium paratungstate production'. Share of biogenic carbon in the sludge: 0%. Landfill gas capture and utilisation generates 0.03321 kWh of electricity and 0.0599 MJ of useful heat. 0.002598 kg waste mass remains in the landfill even after the long term period.

## Included activities start
The activity starts with the waste being available at the gate of the treatment facility. Collection and transportation of the waste to the treatment plant is not included.

## Included activities end
The activity ends with the waste being treated and waste-specific emissions from the landfill are released to the environment (air due to landfil gas and water due to landfil leachate).

## Geography
Landfill site with mean annual temperature (MAT) of 14.2174 degC, mean annual precipitation (MAP) of 910.891 mm/year, and net infiltration of 317.349630701904 mm/year.The leachate percolating through the landfill has an average residence time of 6.33 years.
World Meteorological Organization, 2022. China Meteorological Administration and World Meteorological Organization, World Meteorological Organization Available at: https://worldweather.wmo.int/en/country.html?countryCode=1

## Technology
Sanitary (controlled) landfill for municipal solid waste. Ultimate average landfill height is 20 meters. Operation phase duration is 30 years. The total raw landfill gas mass produced in the landfill from this waste is 0.09783 kg. The total CH4 mass in the raw landfill gas is 0.004139 kg. Percentage of landfill gas directly emitted is 47w%. Percentage of landfill gas captured and flared is 18.02w%. Percentage of landfill gas captured and utilised is 34.98%. Conversion efficiencies are 27.8e% for electricity and 13.5e% for useful heat. Leachate generated during the first 100 years is collected and treated region-specifically before emission. Based on average waste composition and climate data the end of carbonate phase is estimated to be reached 7'013 years after waste deposition.

## Reference product
- heat, district or industrial, other than natural gas: 1 MJ; By-product classification allocatable product; CPC 17300: Steam and hot water; lognormal variance with pedigree 0.5224, pedigree (5,5,5,5,5)
  Net production of heat from landfill gas utilisation.
  Uncertainty: Uncertainty calculated depending on waste input and uncertainty of transfer coefficients in landfill to landfill gas, uncertainty in gas capture and utilisation.
  production volume 3317.39 MJ
    Calculated from the production volume of the reference product in proportion to the respective output amounts.
  property price 0.0106 EUR2005
    Average European district heat price from Ecoheatcool and Euroheat 2005-2006, Ecoheat Work package 1: The European heat market. Final report. 10.6 EUR/GJ i s the price of district heat. http://www.solarthermalworld.org/files/Ecoheatcool%20WP1%20Web.pdf?download
  properties: carbon allocation 0 kg, carbon content 0, carbon content, fossil 0, carbon content, non-fossil 0, dry mass 1 kg, heating value, net 1 MJ, water content 0, water in wet mass 0 kg, wet mass 1 kg

## Inputs from technosphere
- aluminium sulfate, powder: 8.67656e-8 kg
- ammonia, anhydrous, liquid: 2.49959e-8, 2.61984e-9, 2.60178e-5, 1.28765e-8, 1.17116e-8, 2.77064e-7, 8.27675e-9 kg (7 suppliers, which the file names only by identifier); sum of these 2.63553e-5 kg
- ammonium chloride: 0.000145243 kg
- calcium carbonate, precipitated: 4.11452e-7 kg
- chemical, organic: 2.41016e-7 kg
- copper sulfate: 8.22905e-6 kg
- electricity, medium voltage: 7.42184e-9, 2.08884e-8, 1.99676e-9, 5.56255e-10, 6.78677e-9, 9.42374e-10, 3.58764e-8, 2.27665e-7, 8.40612e-8, 4.49787e-8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 kWh (46 suppliers, which the file names only by identifier); sum of these 0.000266874 kWh
- fatty alcohol: 2.41016e-7 kg
- hazardous waste, for underground deposit: -0.000287194 kg
- heat, district or industrial, other than natural gas: 0.0128185 MJ
- hydrochloric acid, without water, in 30% solution state: 1.97909e-6 kg
- hydrogen peroxide, without water, in 50% solution state: 4.11452e-7 kg
- inert waste: -6.03589e-9, -0.000351892 kg (2 suppliers, which the file names only by identifier); sum of these -0.000351898 kg
- kerosene: 1.4424e-8, 2.43983e-6, 8.64283e-8, 2.74199e-7, 1.83144e-8, 3.54939e-8, 2.34925e-8 kg (7 suppliers, which the file names only by identifier); sum of these 2.89219e-6 kg
- magnesium sulfate: 3.1332e-8 kg
- municipal solid waste: -9.87486e-6 kg
- non-ferrous metal smelter: 3.12349e-15 unit
- soda ash, light: 5.17065e-6 kg
- sodium hydrosulfide: 3.74698e-6 kg
- sodium hydroxide, without water, in 50% solution state: 0.00021654 kg
- spent solvent mixture: -5.18021e-6, -4.74212e-8 kg (2 suppliers, which the file names only by identifier); sum of these -5.22763e-6 kg
- sulfuric acid: 2.297e-5 kg
- tap water: 0.0414609 kg
- tungsten concentrate: 0.000670339 kg
- wastewater from ammonium paratungstate production: -4.91623e-8, -4.23328e-5 m3 (2 suppliers, which the file names only by identifier); sum of these -4.2382e-5 m3
- water, deionised: 1.60176e-8, 1.44449e-5 kg (2 suppliers, which the file names only by identifier); sum of these 1.44609e-5 kg
- water, ultrapure: 0.000865469 kg

## Inputs from nature
- Water, well, in ground [natural resource, in water]: 4.15514e-8 m3

## Emissions to nature
- Ammonia [air, non-urban air or from high stacks]: 4.47799e-5 kg
- Carbon dioxide, fossil [air, non-urban air or from high stacks]: 7.08586e-7 kg
- Hydrogen sulfide [air, non-urban air or from high stacks]: 7.42856e-9 kg
