# treatment of wastewater from soft fibreboard production, wastewater treatment

Dataset: EcoSpold 2, unit process
Geography: RoW
Time period: 2010-01-01 to 2022-12-31
Technology level: current
Classification: ISIC rev.4 ecoinvent: 3700:Sewerage
Scenario: Business-as-Usual
System model: Allocation at the point of substitution
Generated by: Nikolia Stoikou
Database: ecoinvent
isCopyrightProtected: true

## General comment
This dataset represents the treatment of a wastewater, generated from an ordinary transforming activity. Purification in wastewater treatment of 'wastewater from soft fibreboard production'. Recommended use of this dataset: to be used for wastewaters, generated from ordinary transforming activities, of equal or similar composition. The wastewater has a content of TOC: 1.1685 kg/m3, COD: 4.55556 kg/m3 and BOD: 2.2033 kg/m3. TOC is equal to C present in the wastewater, COD is calculated as TOC/0.2565 and BOD is calculated as COD/0.53034. Detailed elemental composition can be found in the properties of the wastewater treated. Share of biogenic carbon in the sludge: 100%.

## Included activities start
The activity starts with the wastewater being available at the gate of the treatment facility. Collection and transportation of the wastewater to the treatment plant is not included.

## Included activities end
The activity ends with the wastewater being treated and waste-specific emissions released to the environment. Expenditures from treatment of wastewater in waste treatment plant are included as well as relevant infrastructure of the plant. Emissions from any sludge digestion, biogas generation and utilization (heeding specific wastewater composition) are also included. Waste-specific direct emissions of untreated wastewater and required territory-specific infrastructure for sewers are not contained within this dataset but instead in the regional market datasets for this wastewater.

## Geography
The site has mean annual temperature (MAT) of 16.743579766537 degC, mean annual precipitation (MAP) of 1250.84108527132 mm/year, mean annual actual evaporation (EAT) of 460.58904958214 mm/year. In the WWT plant, 0% of its water input are lost due to evaporation from pools, 0.0575% of water is *gained* from organic mass degradation, and 0.0264% is removed off site via sludge disposal. (References: UN data, 2020. Precipitation, Environment Statistics Database, United Nations Statistics Division Available at: http://data.un.org/Data.aspx?q=precipitation&d=ENV&f=variableID%3a6; World Bank, 2022. Surface area (sq.km), World Bank Group Available at: https://data.worldbank.org/indicator/AG.SRF.TOTL.K2; Doka G.,2021. A model for composition-specific life cycle inventories of regionalised wastewater fates, Zurich, Switzerland. http://www.doka.ch/publications.htm)

## Technology
This is an inventory for the disposal of a selected wastewater in Global. The reference unit is 1 m3 wastewater input. This activity represents the treatment of a specific wastewater in a WWT plant (while direct emissions and sewering are heeded in the upstream market dataset for this wastewater). The size of the treatment plant infrastructure is for a supranational region average territory situation. The assumed size of the WWTP treats 82.2 Mio m3 per year. The mixture of WWTP with one, two, or three stages is 8.2%-41.2%-50.6%. The actual, waste-specific oxygen requirement in the biological stages is 0.4914708 kg O. The digestion process produces 111.9354 litres of biogas with an energy content of 2.5915465MJ. 60.5% of the biogas is utilized for energy. The remainder is flared. The gross electric efficiency is 26.564%. The gross thermal efficiency is 47.853%. After digestion, the remaining total sludge mass (dry matter) is 0.7489kg DM.

## Reference product
- iron scrap, sorted, pressed: 1 kg; By-product classification Recyclable; CPC 39310: Slag, dross, scalings and other waste from the manufacture of iron or steel; lognormal variance with pedigree 0.3611, pedigree (1,1,1,1,1)
  scrap output from used infrastructure for wastewater treatment plant.
  Uncertainty: Uncertainty calculated from wastewater technosphere fate uncertainty and treatment infrastructure uncertainty.
  production volume 157.534 kg
    Calculated in proportion to wastewater reference product.
  property price 0.175 EUR2005
    Temporary price data. Calculated as 90% of purchasers price based on: 2005 import and export prices (total trades (USD) divided by total weight (kg) in biggest economies of the world: EU27, USA, Brasil, China, India, Japan and Russia) from UN Commodity Trade Statistics Database (http://data.un.org/Explorer.aspxDatabase [Accessed 2011.06.20]). Commodity: Waste or scrap, of cast iron
  properties: carbon allocation 0 kg, carbon content 0, carbon content, fossil 0, carbon content, non-fossil 0, dry mass 1 kg, water content 0, water in wet mass 0 kg, wet mass 1 kg

## Inputs from technosphere
- acrylic dispersion, with water, in 58% solution state: 1.51541e-5 kg
- acrylic varnish, with water, in 53% solution state: 4.97922e-6 kg
- aluminium scrap, post-consumer: -0.000317091 kg
- aluminium, wrought alloy: 0.000317091 kg
- chemical, inorganic: 4.76114e-7 kg
- chemical, organic: 4.76114e-7 kg
- chimney: 1.21124e-9 m
- copper scrap, sorted, pressed: -2.86756e-5 kg
- copper, cathode: 3.18618e-5 kg
- corrugated board box: 0.000334446, 0.000776285, 1.24582e-5 kg (3 suppliers, which the file names only by identifier); sum of these 0.00112319 kg
- diesel, low-sulfur: 9.63304e-10, 2.32161e-8, 1.20679e-8, 4.36273e-10, 6.44974e-11, 1.9443e-9, 9.72475e-10 kg (7 suppliers, which the file names only by identifier); sum of these 3.96648e-8 kg
- electricity, low voltage: 0.00025917, 0.000513616, 0.00493382, 8.8012e-5, 0.00176333, 1.60053e-5, 0.00122227, 0.000359928 kWh (8 suppliers, which the file names only by identifier); sum of these 0.00915616 kWh
- electricity, medium voltage: 1.84742e-5, 5.76456e-6, 0.000247035, 1.71668e-7, 8.75923e-7, 5.28903e-5, 2.89302e-6 kWh (7 suppliers, which the file names only by identifier); sum of these 0.000328105 kWh
- ethylene glycol monoethyl ether: 6.67292e-6 kg
- ethylene vinyl acetate copolymer: 2.63074e-6, 1.1504e-6 kg (2 suppliers, which the file names only by identifier); sum of these 3.78114e-6 kg
- extrusion, plastic film: 2.23782e-5 kg
- hazardous waste, for incineration: -2.20815e-6, -9.41006e-7, -2.45973e-8 kg (3 suppliers, which the file names only by identifier); sum of these -3.17375e-6 kg
- heat, district or industrial, natural gas: 0.000145196, 0.00536222, 0.0145198, 0.000238598 MJ (4 suppliers, which the file names only by identifier); sum of these 0.0202658 MJ
- heavy fuel oil: 3.00479e-7, 2.5284e-9, 1.28539e-8, 1.66671e-8, 3.24357e-9, 4.34199e-9, 1.48729e-7 kg (7 suppliers, which the file names only by identifier); sum of these 4.88843e-7 kg
- industrial furnace, 1MW, oil: 9.08445e-11 unit
- industrial furnace, natural gas: 5.05808e-10 unit
- industrial machine, heavy, unspecified: 2.77614e-6 kg
- isopropanol: 2.77614e-5 kg
- kraft paper: 0.000509504, 0.00023626 kg (2 suppliers, which the file names only by identifier); sum of these 0.000745764 kg
- lead: 5.62267e-5 kg
- light fuel oil: 1.5524e-7, 1.54088e-8, 1.48158e-9, 7.95382e-8, 1.10106e-9, 1.02251e-9, 7.63478e-9 kg (7 suppliers, which the file names only by identifier); sum of these 2.61427e-7 kg
- maintenance, transmission network, electricity, high voltage direct current subsea cable: 9.0324e-8 km*year
- maize starch: 7.02401e-6 kg
- municipal solid waste: -4.1315e-8, -1.28066e-5, -1.4877e-8, -2.92196e-5, -1.04104e-8 kg (5 suppliers, which the file names only by identifier); sum of these -4.20928e-5 kg
- natural gas, high pressure: 2.65545e-8, 1.12087e-8, 6.41955e-8, 1.90508e-8, 1.07772e-6, 1.10151e-7, 1.20239e-8, 3.54808e-10, 4.26951e-8, 4.48349e-8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 m3 (26 suppliers, which the file names only by identifier); sum of these 4.63194e-6 m3
- oil storage, 3000l: 1.13554e-9 unit
- packaging box factory: 1.10237e-12 unit
- packaging film, low density polyethylene: 1.85198e-5 kg
- paper, woodfree, coated: 0.0177011 kg
- polyethylene, high density, granulate: 2.23782e-5 kg
- polypropylene, granulate: 7.33883e-6 kg
- potato starch: 4.83367e-6 kg
- printing ink, offset, without solvent, in 47.5% solution state: 2.55905e-6, 0.000123902 kg (2 suppliers, which the file names only by identifier); sum of these 0.000126461 kg
- scrap copper: -1.42789e-7, -3.04339e-6 kg (2 suppliers, which the file names only by identifier); sum of these -3.18618e-6 kg
- scrap steel: -1.00577e-8, -7.93846e-6 kg (2 suppliers, which the file names only by identifier); sum of these -7.94851e-6 kg
- sheet rolling, aluminium: 0.000317091 kg
- spent solvent mixture: -1.37351e-5, -5.36678e-6 kg (2 suppliers, which the file names only by identifier); sum of these -1.91019e-5 kg
- steel, low-alloyed: 7.94851e-5 kg
- synthetic rubber: 2.27949e-6 kg
- textile, woven cotton: 3.59115e-6 kg
- thermoforming, with calendering: 5.06836e-6 kg
- waste emulsion paint: -3.28179e-6, -3.09356e-7 kg (2 suppliers, which the file names only by identifier); sum of these -3.59115e-6 kg
- waste paper, unsorted: -8.16083e-6, -0.00248979, -0.0024914 kg (3 suppliers, which the file names only by identifier); sum of these -0.00498935 kg
- waste paperboard, unsorted: -0.000561595, -0.000561595 kg (2 suppliers, which the file names only by identifier); sum of these -0.00112319 kg
- waste plastic, mixture: -1.18476e-7, -5.98681e-10, -1.32089e-9, -4.21584e-7, -8.29396e-7, -7.91609e-9, -3.10482e-9, -3.26963e-9 kg (8 suppliers, which the file names only by identifier); sum of these -1.38567e-6 kg
- waste wire plastic: -7.33883e-6 kg
- white spirit: 3.88404e-5 kg
- wire drawing, copper: 3.18618e-5 kg
- zinc coat, coils: 1.27583e-6 m2

## Inputs from nature
- Occupation, seabed, infrastructure [natural resource, land]: 9.93564e-6 m2*year
- Transformation, from seabed, unspecified [natural resource, land]: 2.48391e-7 m2
- Transformation, to seabed, infrastructure [natural resource, land]: 2.48391e-7 m2
- Water, unspecified natural origin [natural resource, in water]: 5.61769e-7 m3

## Emissions to nature
- 2-Propanol [air, urban air close to ground]: 2.77614e-5 kg
- Acetaldehyde [air, urban air close to ground]: 3.15777e-12 kg
- Acetic acid [air, urban air close to ground]: 3.90053e-11 kg
- Acetone [air, urban air close to ground]: 2.97712e-12 kg
- Ammonia [air, urban air close to ground]: 2.1269e-12 kg
- Arsenic ion [air, urban air close to ground]: 2.58017e-13 kg
- Benzene [air, urban air close to ground]: 7.24511e-11 kg
- Benzene, ethyl- [air, urban air close to ground]: 1.23398e-6 kg
- Benzo(a)pyrene [air, urban air close to ground]: 2.72216e-15 kg
- Butane [air, urban air close to ground]: 1.30502e-10 kg
- Calcium [air, urban air close to ground]: 2.18322e-12 kg
- Carbon dioxide, fossil [air, urban air close to ground]: 1.26355e-5 kg
- Carbon monoxide, fossil [air, urban air close to ground]: 5.69713e-10 kg
- Chromium III [air, urban air close to ground]: 9.82447e-14 kg
- Chromium VI [air, urban air close to ground]: 9.92371e-16 kg
- Cobalt II [air, urban air close to ground]: 6.54966e-13 kg
- Copper ion [air, urban air close to ground]: 9.31687e-12 kg
- Dinitrogen monoxide [air, urban air close to ground]: 4.16562e-11 kg
- Dioxins, measured as 2,3,7,8-tetrachlorodibenzo-p-dioxin [air, urban air close to ground]: 2.0136e-20 kg
- Ethanol [air, urban air close to ground]: 5.95424e-12 kg
- Formaldehyde [air, urban air close to ground]: 3.85665e-11 kg
- Heptane [air, urban air close to ground]: 1.20724e-5 kg
- Hydrocarbons, aliphatic, alkanes, unspecified [air, urban air close to ground]: 1.80795e-11 kg
- Hydrocarbons, aliphatic, unsaturated [air, urban air close to ground]: 5.95424e-13 kg
- Hydrocarbons, aromatic [air, urban air close to ground]: 3.36444e-12 kg
- Hydrochloric acid [air, urban air close to ground]: 2.97889e-11 kg
- Hydrogen fluoride [air, urban air close to ground]: 1.06839e-12 kg
- Iron ion [air, urban air close to ground]: 1.62749e-11 kg
- Lead II [air, urban air close to ground]: 2.87788e-12 kg
- Mercury II [air, urban air close to ground]: 1.48246e-14 kg
- Methane, fossil [air, urban air close to ground]: 4.3369e-10 kg
- Methanol [air, urban air close to ground]: 1.27347e-6 kg
- Molybdenum VI [air, urban air close to ground]: 1.5878e-13 kg
- Nickel II [air, urban air close to ground]: 9.72524e-12 kg
- Nitrogen oxides [air, urban air close to ground]: 5.86112e-9 kg
- PAH, polycyclic aromatic hydrocarbons [air, urban air close to ground]: 1.82542e-12 kg
- Particulate Matter, < 2.5 um [air, urban air close to ground]: 2.04133e-10 kg
- Particulate Matter, > 10 um [air, urban air close to ground]: 4.76339e-11 kg
- Particulate Matter, > 2.5 um and < 10um [air, urban air close to ground]: 2.3817e-11 kg
- Pentane [air, urban air close to ground]: 2.19475e-10 kg
- Propane [air, urban air close to ground]: 3.6983e-11 kg
- Propionic acid [air, urban air close to ground]: 3.61291e-12 kg
- Propylene oxide [air, urban air close to ground]: 2.31769e-6 kg
- Selenium IV [air, urban air close to ground]: 2.3817e-13 kg
- Sodium [air, urban air close to ground]: 1.48856e-11 kg
- Sulfur dioxide [air, urban air close to ground]: 8.52145e-9 kg
- Toluene [air, urban air close to ground]: 1.09012e-6 kg
- Vanadium V [air, urban air close to ground]: 1.98475e-11 kg
- Water [air, non-urban air or from high stacks]: 3.34901e-7 m3
- Xylene [air, urban air close to ground]: 1.09008e-6 kg
- Zinc II [air, urban air close to ground]: 1.00909e-11 kg
- BOD5, Biological Oxygen Demand [water, surface water]: 3.95724e-9 kg
- COD, Chemical Oxygen Demand [water, unspecified]: 3.17152e-7 kg
- DOC, Dissolved Organic Carbon [water, unspecified]: 1.17464e-7 kg
- TOC, Total Organic Carbon [water, unspecified]: 1.17464e-7 kg
- Water [water, unspecified]: 2.26868e-7 m3
