# fibre production, jute, retting

Dataset: EcoSpold 2, unit process
Geography: IN
Time period: 2016-04-01 to 2022-03-31
Technology level: current
Classification: ISIC rev.4 ecoinvent: 1311:Preparation and spinning of textile fibres
Scenario: Business-as-Usual
System model: Allocation at the point of substitution
Generated by: Madhuri Nigam
Published in: Faist Emmenegger, M. 2018
Database: ecoinvent
isCopyrightProtected: true

## General comment
The dataset represents production of 1 kg jute fibre from harvested jute plant (fresh green matter.)
Normally, jute retting activity involves immersion of the bundles of jute into stagnant water in the jute cultivation field, tanks, ponds, ditches etc., or in slow moving clear water in canals, rivulets, rivers etc. The minimum ratio of plant material to water in the case of a stagnant water body is 1:11. Jute stalk takes several days for retting and then the loosened fibre is extracted from the jute stalk which becomes the by-product of jute retting activity. The currently used process involves ribboning of green stems. After this the ribbons are immersed in Water. Ribboning greatly reduce material handling and water consumption. Retting takes place from 5-7 days. The retted ribbons are dried and the resulting reeds are then sent to spinning mills for spinning.
In India, since the retting activity is usually accomplished either on the jute growing field or in canals, and sometimes in rivers during the rainy season, the wastewater from the jute retting process gets either diluted by rainwater, or washed away. The environmental impacts of wastewater, from jute retting process are not significant, therefore they are not considered in this inventory.
Another dataset "jute production, irrigated, IN” covering the cultivation activities has been provided as a separate dataset. Since jute retting is a natural process, no machine inputs are considered here in this process.

## Included activities start
Activity begins from ribboning of green jute plants

## Included activities end
This activity ends with is 1 kg ribboned, retted and dried reeds of jute as a result of jute transformation process. The datasets includes use of water and electricity.

## Geography
The location of considered dataset is CRIJAF Barrackpore, area in the state of West Bengal, India. This region is the leader in jute production.The production and cultivation of jute is restricted mainly to the states, along the Ganga-Brahmaputra delta in West Bengal , Assam, Bihar and Orissa. Recently jute production has extended to other states as well. e.g. Meghalaya, Tripura etc.

## Technology
In India, the retting activity is usually accomplished either on the jute growing field or in canals, by immersion of the bundles of jute into stagnant water.

## Reference product
- fibre, jute: 1 kg; name RP_amount_1; By-product classification allocatable product; CPC 01922: Jute, kenaf, and other textile bast fibres, raw or retted, except flax, true hemp and ramie
  production volume 1.71329e9 kg
    This amount represents the production volume of jute fibre for the year 2019/20 in India based on FAO. 2022. Jute, kenaf, sisal, abaca, coir and allied fibres Statistical bulletin 2020. Rome Available at: https://www.fao.org/3/cb7927en/cb7927en.pdf
  property heating value, net 11.96 MJ
    LHV is calculated based on the Carbon content of the product. More details can be found on the respective documentation.
  property price 0.227 EUR2005
    Temporary price data. Calculated as 90% of purchasers price based on: 2005 import and export prices (total trades (USD) divided by total weight (kg) in biggest economies of the world: EU27, USA, Brasil, China, India, Japan and Russia) from UN Commodity Trade Statistics Database (http://data.un.org/Explorer.aspxDatabase [Accessed 2011.06.20]). Commodity: Jute and other textile bast fibres, raw or retted
  properties: carbon allocation 0.404396 kg, carbon content 0.46, carbon content, fossil 0, carbon content, non-fossil 0.46, dry mass 0.879121 kg, water content 0.1375, water in wet mass 0.120879 kg, wet mass 1 kg

## Inputs from technosphere
- electricity, low voltage: 0.0457487 kWh; lognormal variance with pedigree 0.0046, pedigree (1,4,3,1,1)
  sum of electricity used for retting water extraction and water ribbioning
- jute plant, harvested: 8.37856 kg; lognormal variance with pedigree 0.0126, pedigree (4,4,3,1,1)
  Dry retted fibre yield is 6.5% of total plant volume (fresh green matter)
  properties: dry mass 0.177647 kg
- stalk: -0.942206 kg; name BP_amount_1; lognormal variance with pedigree 0.0506, pedigree (4,4,5,1,1)
  production volume
    Calculated from production volume of reference product using the relative outputs.
  properties: carbon content, non-fossil 0.43507, dry mass 0.879121 kg, heating value, net 13.79 MJ, price 0.00702 EUR2005, water content 0.1375, wet mass 1 kg
  note on heating value, net: net (lower) heating (calorific) value. lower calorific value of jute stalk is 3300 kcal/kg (CDM, CER methodology)
- transport, freight, lorry, unspecified: 0.125678 metric ton*km; = (15.384/1000)*15; lognormal variance with pedigree 0.0046, pedigree (1,4,3,1,1)
  The plants are transported from nearby fields; the estimated distance is 15 km.

## Inputs from nature
- Water, lake [natural resource, in water]: 0.0925867 m3; = 170/1000; lognormal variance with pedigree 0.0126, pedigree (4,4,3,1,1)
  170 kgs of water converted to m3. No wastewater output is considere as the retting process is usually accomplished on jute growing fields or in canals and the wastewater either gets diluted or washed away

## Emissions to nature
- Water [air, unspecified]: 0.00689172 m3; lognormal variance with pedigree 0.0126, pedigree (4,4,3,1,1)
  Balance for the water included in the jute plant
- Water [water, surface water]: 0.0925867 m3; = 170/1000; lognormal variance with pedigree 0.0126, pedigree (4,4,3,1,1)
  Balance of water.

## Sampling procedure
Primary data were taken from field visit and interviews and supported by review of literature where required. Information was provided by CRIJAF Barrackpore, West Bengal. Standardized questionnaire was developed and adapted to Jute specific processes. The secondary data from literature and the primary data from interview were compared and matched to obtain highest data quality.
