# treatment of blast furnace slag, residual material landfill

Dataset: EcoSpold 2, unit process
Geography: RoW
Time period: 1987-01-01 to 2022-12-31
Technology level: current
Classification: ISIC rev.4 ecoinvent: 3821:Treatment and disposal of non-hazardous waste
Scenario: Business-as-Usual
System model: Allocation at the point of substitution
Generated by: Avraam Symeonidis
Database: ecoinvent
isCopyrightProtected: true

## General comment
Steelmaking produces large quantities of by-products, with around 450-500 kg of by-products produced per tonne of steel. The main components of these are slags (approximately 80%), along with dusts and sludges from air pollution abatement equipment (flue gas scrubbing) and mill scale. The physical or chemical natures of these by-products means that it can be difficult to find possible uses. Hence, most of these by-products have historically been disposed of in landfills. However, new legislation and financial instruments, such as landfill taxes, mean that landfilling is now a costly and undesirable management solution. Instead, considerable efforts have been made to recover by-products for internal reuse or to sell them to other industries to recover value. The fraction of steelmaking by-products that is sent to landfill has drastically reduced. This activity represents the disposal of 'blast furnace slag' in a residual material landfill. This type of landfill is designed to receive mostly inorganic (low carbon, <5 w-%) wastes in a physically stable form. Further information is provided in ecoinvent report no. 13, Part II: Landfills – Underground Deposits – Landfarming (Doka, 2009).
References
Doka, G. (2009). Life cycle inventories of waste treatment services. Ecoinvent report no. 13. Swiss Centre for Life Cycle Inventories, Dubendorf, Switzerland.
Inventoried waste contains 100% blast furnace slag; .
waste composition (wet, in ppm): H2O 5000; O 402830; H n.a.; C 2290; S 8610; N n.a.; P 220; B n.a.; Cl n.a.; Br n.a.; F n.a.; I n.a.; Ag n.a.; As n.a.; Ba 273; Cd n.a.; Co 3; Cr 132; Cu 5.3; Hg n.a.; Mn 5340; Mo 0.8; Ni 1.4; Pb 3.57; Sb n.a.; Se 3.9; Sn 1.6; V 54; Zn 20; Be 8.2; Sc n.a.; Sr n.a.; Ti 4610; Tl n.a.; W n.a.; Si 168000; Fe 5630; Ca 260000; Al 56700; K 3860; Mg 73800; Na 2600;
Share of carbon in waste that is biogenic 0%.
Additional solidification with 0.4 kg of cement. Note that value for oxygen content was calculated by assuming that other elements in the material are present as oxides and that any missing mass (either not reported or not detected) was assumed to be oxygen.

## Included activities start
Activity starts with the reception of the waste.

## Included activities end
Waste-specific short-term emissions to water from leachate. Long-term emissions from landfill to ground water. Expenditures for solidification with cement.

## Technology
Time period based on the range of years of publication from which composition data were taken. Note that the Residual Material Landfill modelling tool was published in 2009.

## Reference product
- blast furnace slag: -1 kg; name RP; By-product classification Recyclable; CPC 39310: Slag, dross, scalings and other waste from the manufacture of iron or steel
  production volume 1.54e11 kg
    Estimated production volume based on total amount of blast furnace slag (air-cooled and granulated) generated GLO in 2002.
  property aluminium content 0.0569849
    The value of 'aluminium content' is documented in Turner & Symeonidis, 2020.
    Reference: Turner David & Symeonidis Avraam, 2020, Life cycle inventories of the treatment of iron and steelmaking by-products, ecoinvent association, Zürich, Switzerland
  property barium content 0.000274372
    The value of 'barium content' is documented in Turner & Symeonidis, 2020.
    Reference: Turner David & Symeonidis Avraam, 2020, Life cycle inventories of the treatment of iron and steelmaking by-products, ecoinvent association, Zürich, Switzerland
  property beryllium content 8.24121e-6
    The value of 'beryllium content' is documented in Turner & Symeonidis, 2020.
    Reference: Turner David & Symeonidis Avraam, 2020, Life cycle inventories of the treatment of iron and steelmaking by-products, ecoinvent association, Zürich, Switzerland
  property calcium content 0.261307
    The value of 'calcium content' is documented in Turner & Symeonidis, 2020.
    Reference: Turner David & Symeonidis Avraam, 2020, Life cycle inventories of the treatment of iron and steelmaking by-products, ecoinvent association, Zürich, Switzerland
  property carbon content, fossil 0.00230151
    The value of 'carbon content, fossil' is documented in Turner & Symeonidis, 2020.
    Reference: Turner David & Symeonidis Avraam, 2020, Life cycle inventories of the treatment of iron and steelmaking by-products, ecoinvent association, Zürich, Switzerland
  property carbon content, non-fossil 0
    The value of 'carbon content, non-fossil' is documented in Turner & Symeonidis, 2020.
    Reference: Turner David & Symeonidis Avraam, 2020, Life cycle inventories of the treatment of iron and steelmaking by-products, ecoinvent association, Zürich, Switzerland
  property chromium content 0.000132663
    The value of 'chromium content' is documented in Turner & Symeonidis, 2020.
    Reference: Turner David & Symeonidis Avraam, 2020, Life cycle inventories of the treatment of iron and steelmaking by-products, ecoinvent association, Zürich, Switzerland
  property cobalt content 3.01508e-6
    The value of 'cobalt content' is documented in Turner & Symeonidis, 2020.
    Reference: Turner David & Symeonidis Avraam, 2020, Life cycle inventories of the treatment of iron and steelmaking by-products, ecoinvent association, Zürich, Switzerland
  property copper content 5.32663e-6
    The value of 'copper content' is documented in Turner & Symeonidis, 2020.
    Reference: Turner David & Symeonidis Avraam, 2020, Life cycle inventories of the treatment of iron and steelmaking by-products, ecoinvent association, Zürich, Switzerland
  property heating value, net 0 MJ
    Non combustible products are assumed to have an LHV equal to zero (0).
  property iron content 0.00565829
    The value of 'iron content' is documented in Turner & Symeonidis, 2020.
    Reference: Turner David & Symeonidis Avraam, 2020, Life cycle inventories of the treatment of iron and steelmaking by-products, ecoinvent association, Zürich, Switzerland
  property lead content 3.58794e-6
    The value of 'lead content' is documented in Turner & Symeonidis, 2020.
    Reference: Turner David & Symeonidis Avraam, 2020, Life cycle inventories of the treatment of iron and steelmaking by-products, ecoinvent association, Zürich, Switzerland
  property magnesium content 0.0741709
    The value of 'magnesium content' is documented in Turner & Symeonidis, 2020.
    Reference: Turner David & Symeonidis Avraam, 2020, Life cycle inventories of the treatment of iron and steelmaking by-products, ecoinvent association, Zürich, Switzerland
  property manganese content 0.00536683
    The value of 'manganese content' is documented in Turner & Symeonidis, 2020.
    Reference: Turner David & Symeonidis Avraam, 2020, Life cycle inventories of the treatment of iron and steelmaking by-products, ecoinvent association, Zürich, Switzerland
  property molybdenum content 8.0402e-7
    The value of 'molybdenum content' is documented in Turner & Symeonidis, 2020.
    Reference: Turner David & Symeonidis Avraam, 2020, Life cycle inventories of the treatment of iron and steelmaking by-products, ecoinvent association, Zürich, Switzerland
  property nickel content 1.40704e-6
    The value of 'nickel content' is documented in Turner & Symeonidis, 2020.
    Reference: Turner David & Symeonidis Avraam, 2020, Life cycle inventories of the treatment of iron and steelmaking by-products, ecoinvent association, Zürich, Switzerland
  property oxygen content 0.404858
    The value of 'oxygen content' is documented in Turner & Symeonidis, 2020.
    Reference: Turner David & Symeonidis Avraam, 2020, Life cycle inventories of the treatment of iron and steelmaking by-products, ecoinvent association, Zürich, Switzerland
  property phosphorus content 0.000221106
    The value of 'phosphorus content' is documented in Turner & Symeonidis, 2020.
    Reference: Turner David & Symeonidis Avraam, 2020, Life cycle inventories of the treatment of iron and steelmaking by-products, ecoinvent association, Zürich, Switzerland
  property potassium content 0.0038794
    The value of 'potassium content' is documented in Turner & Symeonidis, 2020.
    Reference: Turner David & Symeonidis Avraam, 2020, Life cycle inventories of the treatment of iron and steelmaking by-products, ecoinvent association, Zürich, Switzerland
  property selenium content 3.9196e-6
    The value of 'selenium content' is documented in Turner & Symeonidis, 2020.
    Reference: Turner David & Symeonidis Avraam, 2020, Life cycle inventories of the treatment of iron and steelmaking by-products, ecoinvent association, Zürich, Switzerland
  property silicon content 0.168844
    The value of 'silicon content' is documented in Turner & Symeonidis, 2020.
    Reference: Turner David & Symeonidis Avraam, 2020, Life cycle inventories of the treatment of iron and steelmaking by-products, ecoinvent association, Zürich, Switzerland
  property sodium content 0.00261307
    The value of 'sodium content' is documented in Turner & Symeonidis, 2020.
    Reference: Turner David & Symeonidis Avraam, 2020, Life cycle inventories of the treatment of iron and steelmaking by-products, ecoinvent association, Zürich, Switzerland
  property sulfur content 0.00865327
    The value of 'sulfur content' is documented in Turner & Symeonidis, 2020.
    Reference: Turner David & Symeonidis Avraam, 2020, Life cycle inventories of the treatment of iron and steelmaking by-products, ecoinvent association, Zürich, Switzerland
  property tin content 1.60804e-6
    The value of 'tin content' is documented in Turner & Symeonidis, 2020.
    Reference: Turner David & Symeonidis Avraam, 2020, Life cycle inventories of the treatment of iron and steelmaking by-products, ecoinvent association, Zürich, Switzerland
  property titanium content 0.00463317
    The value of 'titanium content' is documented in Turner & Symeonidis, 2020.
    Reference: Turner David & Symeonidis Avraam, 2020, Life cycle inventories of the treatment of iron and steelmaking by-products, ecoinvent association, Zürich, Switzerland
  property vanadium content 5.42714e-5
    The value of 'vanadium content' is documented in Turner & Symeonidis, 2020.
    Reference: Turner David & Symeonidis Avraam, 2020, Life cycle inventories of the treatment of iron and steelmaking by-products, ecoinvent association, Zürich, Switzerland
  property zinc content 2.01005e-5
    The value of 'zinc content' is documented in Turner & Symeonidis, 2020.
    Reference: Turner David & Symeonidis Avraam, 2020, Life cycle inventories of the treatment of iron and steelmaking by-products, ecoinvent association, Zürich, Switzerland
  properties: carbon allocation 0.00229 kg, carbon content 0.00230151, dry mass 0.995 kg, price 0 EUR2005, water content 0.00502513, water in wet mass 0.005 kg, wet mass 1 kg

## Inputs from technosphere
- cement, unspecified: 0.336881, 0.00126396, 0.00082675, 0.000475158, 0.0334522, 0.00105003, 0.000415975, 0.00536787, 0.0202669 kg (9 suppliers, which the file names only by identifier); sum of these 0.4 kg; lognormal variance with pedigree 0.091084, pedigree (1,1,5,5,4)
  Cement for solidification of residual material waste. Uncertainty in mass from solidification recipe.
  properties: dry mass 1 kg, wet mass 1 kg
- process-specific burdens, residual material landfill: 0.280494, 0.71109, 0.00841689 kg (3 suppliers, which the file names only by identifier); sum of these 1 kg; lognormal variance with pedigree 0.082, pedigree (1,1,5,5,4)
  demands per kilogram waste. uncertainty is heeded in the module
- residual material landfill: 2.08333e-9 unit; lognormal variance with pedigree 0.082, pedigree (1,1,5,5,4)
  demands per kilogram waste. uncertainty is heeded in the module
- waste cement, hydrated: -0.00841689, -0.280494, -0.71109 kg (3 suppliers, which the file names only by identifier); sum of these -1 kg; lognormal variance with pedigree 0.059084, pedigree (1,1,4,5,4)
  Hydrated cement for solidification of residual material waste. Uncertainty in mass from solidification recipe.
  production volume
    Calculated based on the production volume of the reference product.
  properties: dry mass 1 kg, wet mass 1 kg

## Emissions to nature
- Aluminium III [water, ground-, long-term]: 0.0168315 kg; lognormal variance with pedigree 0.625667, pedigree (1,1,5,5,4)
  uncertainty is calculated from uncertainties in waste composition and transfer coefficients in incinerator and landfills.
- Aluminium III [water, surface water]: 2.80994e-5 kg; lognormal variance with pedigree 1.00136, pedigree (1,1,5,5,4)
  uncertainty is calculated from uncertainties in waste composition and transfer coefficients in residual landfill
- BOD5, Biological Oxygen Demand [water, ground-, long-term]: 0.00122334 kg; lognormal variance with pedigree 0.680119, pedigree (1,1,5,5,4)
  (same comment as for Aluminium III)
- BOD5, Biological Oxygen Demand [water, surface water]: 2.0423e-6 kg; lognormal variance with pedigree 1.27553, pedigree (1,1,5,5,4)
  (same comment as for Aluminium III)
- Barium II [water, ground-, long-term]: 2.25506e-6 kg; lognormal variance with pedigree 6.66166, pedigree (1,1,5,5,4)
  (same comment as for Aluminium III)
- Barium II [water, surface water]: 3.76471e-9 kg; lognormal variance with pedigree 2.1281, pedigree (1,1,5,5,4)
  (same comment as for Aluminium III)
- Beryllium II [water, ground-, long-term]: 2.96871e-6 kg; lognormal variance with pedigree 1.63412, pedigree (1,1,5,5,4)
  (same comment as for Aluminium III)
- Beryllium II [water, surface water]: 4.95611e-9 kg; lognormal variance with pedigree 2.09453, pedigree (1,1,5,5,4)
  (same comment as for Aluminium III)
- COD, Chemical Oxygen Demand [water, ground-, long-term]: 0.00373998 kg; lognormal variance with pedigree 0.680119, pedigree (1,1,5,5,4)
  (same comment as for Aluminium III)
- COD, Chemical Oxygen Demand [water, surface water]: 6.2437e-6 kg; lognormal variance with pedigree 1.27553, pedigree (1,1,5,5,4)
  (same comment as for Aluminium III)
- Calcium II [water, ground-, long-term]: 0.0234931 kg; lognormal variance with pedigree 1.57433, pedigree (1,1,5,5,4)
  (same comment as for Aluminium III)
- Calcium II [water, surface water]: 3.92206e-5 kg; lognormal variance with pedigree 1.03073, pedigree (1,1,5,5,4)
  (same comment as for Aluminium III)
- Chromium VI [water, ground-, long-term]: 2.50651e-5 kg; lognormal variance with pedigree 1.01372, pedigree (1,1,5,5,4)
  (same comment as for Aluminium III)
- Chromium VI [water, surface water]: 7.93486e-6 kg; lognormal variance with pedigree 1.17477, pedigree (1,1,5,5,4)
  (same comment as for Aluminium III)
- Cobalt II [water, ground-, long-term]: 5.1289e-7 kg; lognormal variance with pedigree 2.28824, pedigree (1,1,5,5,4)
  (same comment as for Aluminium III)
- Cobalt II [water, surface water]: 8.56243e-10 kg; lognormal variance with pedigree 2.32526, pedigree (1,1,5,5,4)
  (same comment as for Aluminium III)
- Copper ion [water, ground-, long-term]: 2.04021e-7 kg; lognormal variance with pedigree 4.08601, pedigree (1,1,5,5,4)
  (same comment as for Aluminium III)
- Copper ion [water, surface water]: 3.40603e-10 kg; lognormal variance with pedigree 2.44773, pedigree (1,1,5,5,4)
  (same comment as for Aluminium III)
- DOC, Dissolved Organic Carbon [water, ground-, long-term]: 0.00147992 kg; lognormal variance with pedigree 0.680119, pedigree (1,1,5,5,4)
  (same comment as for Aluminium III)
- DOC, Dissolved Organic Carbon [water, surface water]: 2.47065e-6 kg; lognormal variance with pedigree 1.27553, pedigree (1,1,5,5,4)
  (same comment as for Aluminium III)
- Iron ion [water, ground-, long-term]: 2.82174e-5 kg; lognormal variance with pedigree 7.53101, pedigree (1,1,5,5,4)
  (same comment as for Aluminium III)
- Iron ion [water, surface water]: 4.71075e-8 kg; lognormal variance with pedigree 1.8026, pedigree (1,1,5,5,4)
  (same comment as for Aluminium III)
- Lead II [water, ground-, long-term]: 1.8518e-8 kg; lognormal variance with pedigree 8.40658, pedigree (1,1,5,5,4)
  (same comment as for Aluminium III)
- Lead II [water, surface water]: 3.09148e-11 kg; lognormal variance with pedigree 2.76431, pedigree (1,1,5,5,4)
  (same comment as for Aluminium III)
- Magnesium [water, ground-, long-term]: 0.00838537 kg; lognormal variance with pedigree 1.41377, pedigree (1,1,5,5,4)
  (same comment as for Aluminium III)
- Magnesium [water, surface water]: 1.39989e-5 kg; lognormal variance with pedigree 1.10214, pedigree (1,1,5,5,4)
  (same comment as for Aluminium III)
- Manganese II [water, ground-, long-term]: 4.411e-5 kg; lognormal variance with pedigree 6.27695, pedigree (1,1,5,5,4)
  (same comment as for Aluminium III)
- Manganese II [water, surface water]: 7.36393e-8 kg; lognormal variance with pedigree 1.7434, pedigree (1,1,5,5,4)
  (same comment as for Aluminium III)
- Molybdenum VI [water, ground-, long-term]: 3.67284e-9 kg; lognormal variance with pedigree 1.70378, pedigree (1,1,5,5,4)
  (same comment as for Aluminium III)
- Molybdenum VI [water, surface water]: 7.96327e-7 kg; lognormal variance with pedigree 1.68029, pedigree (1,1,5,5,4)
  (same comment as for Aluminium III)
- Nickel II [water, ground-, long-term]: 5.06852e-7 kg; lognormal variance with pedigree 1.86576, pedigree (1,1,5,5,4)
  (same comment as for Aluminium III)
- Nickel II [water, surface water]: 8.46164e-10 kg; lognormal variance with pedigree 2.32617, pedigree (1,1,5,5,4)
  (same comment as for Aluminium III)
- Phosphate [water, ground-, long-term]: 0.000150703 kg; lognormal variance with pedigree 1.50029, pedigree (1,1,5,5,4)
  (same comment as for Aluminium III)
- Phosphate [water, surface water]: 2.51591e-7 kg; lognormal variance with pedigree 1.72083, pedigree (1,1,5,5,4)
  (same comment as for Aluminium III)
- Potassium I [water, ground-, long-term]: 0.00277193 kg; lognormal variance with pedigree 0.570183, pedigree (1,1,5,5,4)
  (same comment as for Aluminium III)
- Potassium I [water, surface water]: 0.00108807 kg; lognormal variance with pedigree 0.608488, pedigree (1,1,5,5,4)
  (same comment as for Aluminium III)
- Selenium IV [water, ground-, long-term]: 2.52463e-6 kg; lognormal variance with pedigree 1.47934, pedigree (1,1,5,5,4)
  (same comment as for Aluminium III)
- Selenium IV [water, surface water]: 1.37537e-6 kg; lognormal variance with pedigree 1.50349, pedigree (1,1,5,5,4)
  (same comment as for Aluminium III)
- Silicon [water, ground-, long-term]: 0.167622 kg; lognormal variance with pedigree 0.160256, pedigree (1,1,5,5,4)
  (same comment as for Aluminium III)
- Silicon [water, surface water]: 0.000377823 kg; lognormal variance with pedigree 0.708969, pedigree (1,1,5,5,4)
  (same comment as for Aluminium III)
- Sodium I [water, ground-, long-term]: 0.00162428 kg; lognormal variance with pedigree 0.622257, pedigree (1,1,5,5,4)
  (same comment as for Aluminium III)
- Sodium I [water, surface water]: 0.000975725 kg; lognormal variance with pedigree 0.642714, pedigree (1,1,5,5,4)
  (same comment as for Aluminium III)
- Sulfate [water, ground-, long-term]: 0.0230587 kg; lognormal variance with pedigree 0.468215, pedigree (1,1,5,5,4)
  (same comment as for Aluminium III)
- Sulfate [water, surface water]: 0.00277126 kg; lognormal variance with pedigree 0.581473, pedigree (1,1,5,5,4)
  (same comment as for Aluminium III)
- TOC, Total Organic Carbon [water, ground-, long-term]: 0.00147992 kg; lognormal variance with pedigree 0.680119, pedigree (1,1,5,5,4)
  (same comment as for Aluminium III)
- TOC, Total Organic Carbon [water, surface water]: 2.47065e-6 kg; lognormal variance with pedigree 1.27553, pedigree (1,1,5,5,4)
  (same comment as for Aluminium III)
- Tin ion [water, ground-, long-term]: 3.03189e-8 kg; lognormal variance with pedigree 5.52264, pedigree (1,1,5,5,4)
  (same comment as for Aluminium III)
- Tin ion [water, surface water]: 5.06158e-11 kg; lognormal variance with pedigree 2.6983, pedigree (1,1,5,5,4)
  (same comment as for Aluminium III)
- Titanium ion [water, ground-, long-term]: 0.00136849 kg; lognormal variance with pedigree 0.912822, pedigree (1,1,5,5,4)
  (same comment as for Aluminium III)
- Titanium ion [water, surface water]: 2.28462e-6 kg; lognormal variance with pedigree 1.28852, pedigree (1,1,5,5,4)
  (same comment as for Aluminium III)
- Vanadium V [water, ground-, long-term]: 4.15051e-5 kg; lognormal variance with pedigree 1.1433, pedigree (1,1,5,5,4)
  (same comment as for Aluminium III)
- Vanadium V [water, surface water]: 1.32527e-7 kg; lognormal variance with pedigree 1.66368, pedigree (1,1,5,5,4)
  (same comment as for Aluminium III)
- Zinc II [water, ground-, long-term]: 2.4512e-7 kg; lognormal variance with pedigree 6.10192, pedigree (1,1,5,5,4)
  (same comment as for Aluminium III)
- Zinc II [water, surface water]: 4.09215e-10 kg; lognormal variance with pedigree 2.4236, pedigree (1,1,5,5,4)
  (same comment as for Aluminium III)

## Sampling procedure
For more details about sampling procedures, refer to: Turner, D. & Symeonidis, A. (2020). Life cycle inventories of the treatment of iron and steelmaking by-products, ecoinvent association, Zürich, Switzerland.
