# oil mill construction

Dataset: EcoSpold 2, unit process
Geography: RoW
Time period: 2004-01-01 to 2022-12-31
Technology level: current
Classification: EcoSpold01Categories: biomass/fuels
Classification: ISIC rev.4 ecoinvent: 4290:Construction of other civil engineering projects
Tags: ConvertedDataset
Scenario: Business-as-Usual
System model: Allocation at the point of substitution
Share of production covered: 0 %
Generated by: Edgard Gnansounou
Published in: Jungbluth N. 2007
Database: ecoinvent
isCopyrightProtected: true

## General comment
Oil mill with a daily production of 63 t vegetable oil. Life time of plant taken as 50 years.
[This dataset was already contained in the ecoinvent database version 2. It was not individually updated during the transfer to ecoinvent version 3. Life Cycle Impact Assessment results may still have changed, as they are affected by changes in the supply chain, i.e. in other datasets. This dataset was generated following the ecoinvent quality guidelines for version 2. It may have been subject to central changes described in the ecoinvent version 3 change report (http://www.ecoinvent.org/database/ecoinvent-version-3/reports-of-changes/), and the results of the central updates were reviewed extensively. The changes added e.g. consistent water flows and other information throughout the database. The documentation of this dataset can be found in the ecoinvent reports of version 2, which are still available via the ecoinvent website. The change report linked above covers all central changes that were made during the conversion process.]

## Included activities end
This process includes land use and occupation, buildings and facilities of a typical industrial oil mill in the Swiss context. Storage of the seeds is included in the infrastructure. Energy use for construction and related emissions and/or waste effluents are not included.

## Geography
Data from biodiesel producer in CH, adapted to the plant size considered.

## Technology
Typical oil mill designed for vegetable oil extraction (for use in the biodiesel industry), with pre-pressing of rape seeds, Swiss context.

## Reference product
- oil mill: 1 unit; By-product classification allocatable product; CPC 53290: Other civil engineering works
  EcoSpold01Location=CH
  production volume 106.351 unit
    FAOSTAT data for cottonseed oil, groundnut oil, linseed oil, maize oil, palm oil, palm kernel oil, rapeseed oil, safflower oil, sesame oil, soybean oil and sunflower oil: 1.17E11 kg oil; oil mill produces 22 million kg oil per year; lifetime 50 years
  property price 1.35103e6 EUR2005
    Calculated based on inputs: The price of the product has been calculated as a sum of the values of the material and energy inputs for this product. This value is therefore a rough estimation. It may underestimate the real price since there are additional expenses when producing any product. These expences can include for example labour costs, treatment of waste materials and profit for the producer. Please consider carefully whether this level of data quality is acceptable for your application.
  properties: carbon allocation 0 kg, carbon content 0

## Inputs from technosphere
- building, hall: 2500 m2; lognormal variance with pedigree 0.432, pedigree (3,5,5,5,4)
  Data from biodiesel producer in CH, industrial data
  EcoSpold01Location=CH
  Uncertainty: Data from biodiesel producer in CH, industrial data
- building, hall, steel construction: 5170 m2; lognormal variance with pedigree 0.432, pedigree (3,5,5,5,4)
  EcoSpold01Location=CH
  Data from biodiesel producer in CH, industrial data
  Uncertainty: Data from biodiesel producer in CH, industrial data
- steel, low-alloyed, hot rolled: 738000 kg; lognormal variance with pedigree 0.132, pedigree (3,5,5,5,4)
  Data from biodiesel producer in CH, industrial data
  EcoSpold01Location=RER
  Uncertainty: Data from biodiesel producer in CH, industrial data
  properties: carbon content, fossil 0.005, dry mass 1 kg, wet mass 1 kg
  note on carbon content, fossil: Low alloyed steel composition given in Tab. 3.2 ecoinvent v2.2 report 10_partII. Steel assumed to have a C content of 0.5%

## Inputs from nature
- Occupation, construction site [natural resource, land]: 30680 m2*year; lognormal variance with pedigree 0.172, pedigree (3,5,5,5,4)
  Data from biodiesel producer in CH, industrial data
  Uncertainty: Data from biodiesel producer in CH, industrial data
- Occupation, industrial area [natural resource, land]: 767000 m2*year; lognormal variance with pedigree 0.172, pedigree (3,5,5,5,4)
  (same comment as for Occupation, construction site)
- Transformation, from unspecified [natural resource, land]: 15340 m2; lognormal variance with pedigree 0.252, pedigree (3,5,5,5,4)
  (same comment as for Occupation, construction site)
- Transformation, to industrial area [natural resource, land]: 15340 m2; lognormal variance with pedigree 0.252, pedigree (3,5,5,5,4)
  (same comment as for Occupation, construction site)

## Sampling procedure
Adapted to reference capacity with data from one plant in CH

## Extrapolations
none This dataset has been copied from an original dataset covering the geography CH. The uncertainty has been adjusted accordingly.

## Review by Niels Jungbluth 2006-07-12
Passed.
none
