# lentil production

Dataset: EcoSpold 2, unit process
Geography: RoW
Time period: 2017-01-01 to 2022-12-31
Technology level: current
Classification: ISIC rev.4 ecoinvent: 0111:Growing of cereals (except rice), leguminous crops and oil seeds
Scenario: Business-as-Usual
System model: Allocation at the point of substitution
Generated by: Nathan Pelletier
Published in: Food Systems PRISM Lab 2020
Database: ecoinvent
isCopyrightProtected: true

## General comment
This dataset represents the production of 1 tonne of dried lentil product with a dry matter of 84% at minimum during May-August, 2019, at 97365.83 ha lentil farms located in the Prairie Provinces, Canada. Farms have yield of 1697.16 kg dried matter per ha for this crop cycle. The system boundaries include the production of all of crop inputs (e.g. seeds, fertilizers, crop protection products, and fuel). There is an estimated 0.516 kg of N fixation per tonne of lentils produced in this region that can be included as an avoided use of N fertilizer for the next crop in the rotation. However, this was not included in this model due to data presentation restrictions. Irrigation is not included since it is rarely performed for lentils in this region. Sowing date for the crop is May, 2019 and harvesting date is August, 2020. Seeding rate is 0.06 kg/tonne of lentil production. Fertilizer applied contain nitrogen (as N) 5.21 kg/tonne, phosphate (as P2O5) 18.33 kg/tonne, potash (as K2O) 1.72 kg/tonne, sulfur (as S) 2.63 kg/tonne, and zinc (as Zn) 0.05 kg/tonne. Predominant crop protection applied contain active ingredients of Glyphosate 639.32 g/tonne, Ethalfluralin 70.02 g/tonne, and Sethoxydim 34.10 g/tonne. Machinery is used for tillage (disk), land rolling, seeding, tillage (cultivator), swathing, harrowing, fertilizer application, in-crop herbicide application, foliar fungicide application, foliar insecticide application, combining, post-harvest herbicide application, and burndown/desiccant application with total fuel consumption of 59.42 kg/tonne.

## Included activities start
Starting inputs for this activity include seed, fertilizer, crop protection products and fuel on the farm. This activity begins with soil preparation about 37 weeks after the harvest of the previous crop. The soil is prepared for cultivation in 1st week of May and sowing of seeds started about 5 days after soil preparation.

## Included activities end
This activity ends with lentil drying to <16% moisture at farm gate. Carbon and nitrogen emissions associated with above- and below-ground biomass are accounted for using the DNDC model. This model was also used to calculate a nitrogen fixation credit that can be included as an avoided use of N fertilizer for the next crop in the rotation. However, this was not included in this model due to data presentation restrictions. For lentils in this region, the N credit was estimated to be 0.516 kg/t.

## Geography
Refers to weighted-average production in the Prairie Provinces of Canada (reflects the global average production of lentil).

## Technology
Production of lentil includes farm practices from tillage (disk), land rolling, seeding, tillage (cultivator), swathing, harrowing, fertilizer application, in-crop herbicide application, foliar fungicide application, foliar insecticide application, combining, post-harvest herbicide application, burndown/desiccant application, to drying.

## Time period
Soil cultivating date for the main crop: April - May 2019; Harvesting date main crop: August, 2017-2019. The soil cultivation, sowing and harvesting dates are the data collected by the farmers. Total time from date of sowing to date of harvesting comes to 119 days. The data is collected for three crop cycles. The cycle of one year is considered for entry in ecoinvent.

## Parameters
- LUC_crop_specific: 1 dimensionless
- yield kgha: 1697.16 kg/ha

## Reference product
- lentil: 1 kg; By-product classification allocatable product; CPC 01709: Pulses, n.e.c.
  production volume 5.73404e9 kg
    Production volume for dry lentil is provided in kg. Data is for the year 2017-2019.
  property price 0.521542 EUR2005
    Literature value. Price from FAOSTAT data Producer Prices - Annual (retrieved from: http://www.fao.org/faostat/en/#data/PP, accessed 15Feb2018). Data from 2005.
  properties: carbon allocation 0.435765 kg, carbon content 0.475, carbon content, fossil 0, carbon content, non-fossil 0.475, dry mass 0.9174 kg, water content 0.0900371, water in wet mass 0.0826 kg, wet mass 1 kg

## Inputs from technosphere
- ammonium nitrate: 8.165e-6, 4.35241e-6, 1.47752e-5 kg (3 suppliers, which the file names only by identifier); sum of these 2.72926e-5 kg; lognormal variance with pedigree 0.002, pedigree (2,3,2,1,1)
  This refers to production of ammonium nitrate (as N).
  Uncertainty: D
  properties: dry mass 1 kg, wet mass 1 kg
- ammonium sulfate: 5.82283e-5, 0.000189752 kg (2 suppliers, which the file names only by identifier); sum of these 0.00024798 kg; lognormal variance with pedigree 0.002, pedigree (2,3,2,1,1)
  This refers to production of ammonium sulphate (as N), and ammonium thiosulphate (as N).
  Uncertainty: D
  properties: dry mass 1 kg, wet mass 1 kg
- application of plant protection product, by field sprayer: 2.71554e-5 ha; lognormal variance with pedigree 0.0008, pedigree (1,1,2,1,1)
  This refers to application of plant protection product, by field sprayer.
- combine harvesting: 0.000225518 ha; lognormal variance with pedigree 0.0008, pedigree (1,1,2,1,1)
  This refers to combine harvesting.
- diammonium phosphate: 2.88436e-5, 2.22775e-5, 1.81782e-6 kg (3 suppliers, which the file names only by identifier); sum of these 5.29389e-5 kg; lognormal variance with pedigree 0.002, pedigree (2,3,2,1,1)
  This refers to production of diammonium phosphate (DAP) (as N), and diammonium phosphate (DAP) (as P2O5).
  Uncertainty: D
  properties: dry mass 1 kg, nitrogen content 0.18, phosphorus content 0.200754, wet mass 1 kg
  note on nitrogen content: Nitrogen content (on a dry matter basis) of diammonium phosphate is calculated from the molecular formula of the nutrient present in the substance.
  note on phosphorus content: Phosphorus content (on a dry matter basis) of diammonium phosphate is calculated from the molecular formula of the nutrient present in the substance.
- drying of lentils: 0.0244 l; lognormal variance with pedigree 0.0008, pedigree (1,1,2,1,1)
  This refers to drying of lentils.
- fertilising, by broadcaster: 0.000189981 ha; lognormal variance with pedigree 0.0008, pedigree (1,1,2,1,1)
  This refers to fertilising, by broadcaster.
- glyphosate: 0.000673 kg; lognormal variance with pedigree 0.0014, pedigree (1,3,2,1,1)
  This refers to production of glyphosate.
  Uncertainty: D
  properties: carbon content, fossil 0.214286, dry mass 1 kg, wet mass 1 kg
- lentil seed, for sowing: 5.9e-5 kg; lognormal variance with pedigree 0.0014, pedigree (1,3,2,1,1)
  This refers to production of lentil seed.
  Uncertainty: D
  properties: carbon content, non-fossil 0.475, dry mass 0.9174 kg, water content 0.0900371, wet mass 1 kg
- monoammonium phosphate: 0.00016578, 0.00813879, 0.0144707 kg (3 suppliers, which the file names only by identifier); sum of these 0.0227752 kg; lognormal variance with pedigree 0.002, pedigree (2,3,2,1,1)
  This refers to production of 40 Rock (as N), Alpine (as N), Ammonium Polyphosphate (liquid) (as N), Blend 10-27-9-14 (as N), Blend 2-22-19-5 (as N), Blend 9-31-10-17 (as N), Crystal Green (as N), In-furrow liquid starter 30-62-4-4 (as N), In-furrow liquid starter 6-24-6 (as N), MIcroEssentials S10 (as N), MicroEssentials S15 (as N), MicroEssentials SZ (as N), Monoammonium Phosphate (MAP) (as N), 40 Rock (as P2O5), Alpine (as P2O5), Ammonium Polyphosphate (liquid) (as P2O5), Blend 10-27-9-14 (as P2O5), Blend 2-22-19-5 (as P2O5), Blend 9-31-10-17 (as P2O5), Crystal Green (as P2O5), In-furrow liquid starter 0-15-0-0 (as P2O5), In-furrow liquid starter 30-62-4-4 (as P2O5), In-furrow liquid starter 6-24-6 (as P2O5), MIcroEssentials S10 (as P2O5), MicroEssentials S15 (as P2O5), MicroEssentials SZ (as P2O5), and Monoammonium Phosphate (MAP) (as P2O5).
  Uncertainty: D
  properties: dry mass 1 kg, nitrogen content 0.084, phosphorus content 0.226939, wet mass 1 kg
  note on nitrogen content: Nitrogen content (on a dry matter basis) of monoammonium phosphate is calculated from the molecular formula of the nutrient present in the substance.
  note on phosphorus content: Phosphorus content (on a dry matter basis) of monoammonium phosphate is calculated from the molecular formula of the nutrient present in the substance.
- peat moss: 7.12036e-6 m3; = 0.001473915/207
  Peat moss is used as a proxy to model the used inoculum. The amount is calculated by dividing the peat moss mass by its density (207 kg/m3).
  properties: heating value, net 17.88 MJ
- pesticide, unspecified: 0.000304085 kg; lognormal variance with pedigree 0.002, pedigree (1,3,2,1,2)
  This refers to production of herbicides (except glyphosate), fungicides and insecticides.
  Uncertainty: D
  properties: carbon content, fossil 0.486978, dry mass 1 kg, wet mass 1 kg
- potassium chloride: 0.00156661, 0.000129923 kg (2 suppliers, which the file names only by identifier); sum of these 0.00169653 kg; lognormal variance with pedigree 0.002, pedigree (2,3,2,1,1)
  This refers to production of Alpine (as K2O), Alpine K Thio (as K2O), Blend 10-27-9-14 (as K2O), Blend 2-22-19-5 (as K2O), Blend 9-31-10-17 (as K2O), In-furrow liquid starter 30-62-4-4 (as K2O), In-furrow liquid starter 6-24-6 (as K2O), and Potash (as K2O).
  Uncertainty: D
  properties: dry mass 1 kg, wet mass 1 kg
- potassium sulfate: 4.05331e-6, 1.92416e-5 kg (2 suppliers, which the file names only by identifier); sum of these 2.32949e-5 kg; lognormal variance with pedigree 0.002, pedigree (2,3,2,1,1)
  This refers to production of potassium suphate (as K2O).
  Uncertainty: D
  properties: dry mass 1 kg, wet mass 1 kg
- sowing: 8.29894e-5 ha; lognormal variance with pedigree 0.0008, pedigree (1,1,2,1,1)
  This refers to sowing.
- sulfur: 0.0026308 kg; lognormal variance with pedigree 0.002, pedigree (2,3,2,1,1)
  This refers to production of 40 Rock (as S), Alpine K Thio (as S), Bio-Sul (as S), Bio-Sul Premium Plus (as S), Blend 10-27-9-14 (as S), Blend 2-22-19-5 (as S), Blend 9-31-10-17 (as S), In-furrow liquid starter 30-62-4-4 (as S), MIcroEssentials S10 (as S), MicroEssentials S15 - S, MicroEssentials SZ - S, NutraSul90 (as S), Supreme85 (as S), and Tiger 90 (S).
  Uncertainty: D
  properties: dry mass 1 kg, wet mass 1 kg
- swath, by rotary windrower: 8.14197e-5 ha; lognormal variance with pedigree 0.0008, pedigree (1,1,2,1,1)
  This refers to swath, by rotary windrower.
- tillage, cultivating, chiselling: 0.0022667 ha; lognormal variance with pedigree 0.0008, pedigree (1,1,2,1,1)
  This refers to tillage, cultivating, chiselling.
- tillage, harrowing, by offset disc harrow: 0.000584802 ha; lognormal variance with pedigree 0.0008, pedigree (1,1,2,1,1)
  This refers to tillage, harrowing, by offset disk harrow.
- tillage, harrowing, by rotary harrow: 0.000473738 ha; lognormal variance with pedigree 0.0008, pedigree (1,1,2,1,1)
  This refers to tillage, harrowing, by rotary harrow.
- tillage, rolling: 0.000205351 ha; lognormal variance with pedigree 0.0008, pedigree (1,1,2,1,1)
  This refers to tillage, rolling.
- tillage, rotary cultivator: 0.000264828 ha; lognormal variance with pedigree 0.0008, pedigree (1,1,2,1,1)
  This refers to tillage, rotary cultivator.
- urea: 2.94096e-5, 0.000187581, 0.000160181 kg (3 suppliers, which the file names only by identifier); sum of these 0.000377172 kg; lognormal variance with pedigree 0.002, pedigree (2,3,2,1,1)
  This refers to production of superU (as N), and urea (as N).
  Uncertainty: D
  properties: carbon content, fossil 0.2, dry mass 1 kg, wet mass 1 kg
- urea ammonium nitrate mix: 9.18728e-6, 7.74998e-6, 3.50654e-5 kg (3 suppliers, which the file names only by identifier); sum of these 5.20027e-5 kg; lognormal variance with pedigree 0.002, pedigree (2,3,2,1,1)
  This refers to production of urea-ammonium-nitrate (UAN) (liquid) (as N).
  Uncertainty: D
  properties: carbon content, fossil 0.0879977, dry mass 0.75 kg, hydrogen content 0.095042, nitrogen content 0.401231, oxygen content 0.749063, water content 0.333333, wet mass 1 kg
  note on carbon content, fossil: Carbon content, fossil is calculated based on the chemical formula of the substance.
  note on hydrogen content: Hydrogen content (on a dry matter basis) of urea ammonium nitrate mix is calculated from the molecular formula of the substance (CH6N4O4).
  note on nitrogen content: Nitrogen content (on a dry matter basis) of urea ammonium nitrate mix is calculated from the molecular formula of the substance (CH6N4O4).
  note on oxygen content: Oxygen content (on a dry matter basis) of urea ammonium nitrate mix is calculated from the molecular formula of the substance (CH6N4O4).
- zinc: 4.88375e-5 kg; lognormal variance with pedigree 0.002, pedigree (2,3,2,1,1)
  This refers to production of MicroEssentials SZ - Zn.
  Uncertainty: D
  properties: dry mass 1 kg, wet mass 1 kg

## Inputs from nature
- Occupation, annual crop, non-irrigated [natural resource, land]: 5.89221 m2*year; lognormal variance with pedigree 0.0022, pedigree (1,1,2,1,1)
  Uncertainty: D
- Transformation, from unspecified [natural resource, land]: 5.89221 m2; lognormal variance with pedigree 0.0082, pedigree (1,1,2,1,1)
  Uncertainty: D
- Transformation, to annual crop, non-irrigated [natural resource, land]: 5.89221 m2; lognormal variance with pedigree 0.0082, pedigree (1,1,2,1,1)
  Uncertainty: D

## Emissions to nature
- Ammonia [air, low population density, long-term]: 0.000175 kg; lognormal variance with pedigree 0.0108, pedigree (3,3,2,1,1)
  Modelled with using the DeNitrification DeComposition (DNDC) -Management Factor Tool (DNDC-MFT) that was developed by Smith et al, (2010). The Canadian version of DNDC that has been used in this study was developed to include a crop growth model for cultivars grown in Canada as well as the impact of snow dynamics, crop biomass, and residue management on soil temperature (Dutta et al, 2016). (References: Dutta B, Smith WN, Grant BB, et al (2016) Model development in DNDC for the prediction of evapotranspiration and water use in temperate field cropping systems. Environ Model Softw 80:. https://doi.org/10.1016/j.envsoft.2016.02.014
  Uncertainty: D
- Azoxystrobin [air, non-urban air or from high stacks]: 4.67e-7 kg; lognormal variance with pedigree 0.0408, pedigree (1,3,2,1,1)
  Modelled, farm-level emissions from plant protection product application were modelled based on the active ingredients for each substance. As per Margni et al. (2002), it was assumed that, regardless of the timing of the products, 76.5% of the active ingredient of each agricultural plant protection product is emitted to soil, 8.5% to water, and 10% to air. This means a total of 95% of the applied active ingredient is emitted back to the environment. The last 5% is taken up by the plant and was therefore not considered as an emission in this model. (Reference: Margni M, Rossier D, Crettaz P, Jolliet O (2002) Life cycle impact assessment of pesticides on human health and ecosystems. Agric Ecosyst Environ 93:379–392. https://doi.org/10.1016/S0167-8809(01)00336-X)
  Uncertainty: D
- Carbon dioxide, fossil [air, low population density, long-term]: 0.00066 kg; lognormal variance with pedigree 0.0008, pedigree (1,1,2,1,1)
  (same comment as for Ammonia)
- Carbon dioxide, from soil or biomass stock [air, unspecified]: 0.559759 kg; = 0.95*1000/yield_kg_ha
  Global average LUC emissions according 2nd edition of the Quantis-modified tool developed by Blonk Consultants 'WFLDB-adapted-Blonk 2014 direct-land-use-change-assessment-tool_2015-05-18a.xlsx', tab. 'Country & land use unknown'. The emission are based on the relative change in production areas in all countries for a given crop. The weighted average is used which takes into acount relative difference in crop expansion into primary forest, secondary forest, grassland, perennial and annual land. The amount of 0.95 tonne of CO2 per ha*year (taken from the tool) is divided with the yield per ha.
- Carfentrazone-ethyl [air, non-urban air or from high stacks]: 2.19e-7 kg; lognormal variance with pedigree 0.0408, pedigree (1,3,2,1,1)
  (same comment as for Azoxystrobin)
- Chlorpyrifos [air, non-urban air or from high stacks]: 1e-8 kg; lognormal variance with pedigree 0.0408, pedigree (1,3,2,1,1)
  (same comment as for Azoxystrobin)
- Clethodim [air, non-urban air or from high stacks]: 8.75e-7 kg; lognormal variance with pedigree 0.0408, pedigree (1,3,2,1,1)
  (same comment as for Azoxystrobin)
- Deltamethrin [air, low population density, long-term]: 3.74e-9 kg; lognormal variance with pedigree 0.0408, pedigree (1,3,2,1,1)
  (same comment as for Azoxystrobin)
- Dicamba [air, non-urban air or from high stacks]: 1.76e-8 kg; lognormal variance with pedigree 0.0408, pedigree (1,3,2,1,1)
  (same comment as for Azoxystrobin)
- Diflufenzopyr [air, low population density, long-term]: 6.83e-9 kg; lognormal variance with pedigree 0.0408, pedigree (1,3,2,1,1)
  (same comment as for Azoxystrobin)
- Dinitrogen monoxide [air, low population density, long-term]: 2.72e-5 kg; lognormal variance with pedigree 0.0328, pedigree (3,3,2,1,1)
  (same comment as for Ammonia)
- Diquat dibromide [air, low population density, long-term]: 8e-7 kg; lognormal variance with pedigree 0.0408, pedigree (1,3,2,1,1)
  (same comment as for Azoxystrobin)
- Ethalfluralin [air, low population density, long-term]: 7.37e-6 kg; lognormal variance with pedigree 0.0408, pedigree (1,3,2,1,1)
  (same comment as for Azoxystrobin)
- Fludioxonil [air, low population density, long-term]: 6.55e-8 kg; lognormal variance with pedigree 0.0408, pedigree (1,3,2,1,1)
  (same comment as for Azoxystrobin)
- Flumioxazin [air, non-urban air or from high stacks]: 1.03e-7 kg; lognormal variance with pedigree 0.0408, pedigree (1,3,2,1,1)
  (same comment as for Azoxystrobin)
- Glufosinate ammonium [air, low population density, long-term]: 1.27e-7 kg; lognormal variance with pedigree 0.0408, pedigree (1,3,2,1,1)
  (same comment as for Azoxystrobin)
- Glyphosate [air, non-urban air or from high stacks]: 6.73e-5 kg; lognormal variance with pedigree 0.0408, pedigree (1,3,2,1,1)
  (same comment as for Azoxystrobin)
- Imazamox [air, non-urban air or from high stacks]: 7.69e-7 kg; lognormal variance with pedigree 0.0408, pedigree (1,3,2,1,1)
  (same comment as for Azoxystrobin)
- Imazethapyr [air, non-urban air or from high stacks]: 5.03e-7 kg; lognormal variance with pedigree 0.0408, pedigree (1,3,2,1,1)
  (same comment as for Azoxystrobin)
- Lambda-cyhalothrin [air, non-urban air or from high stacks]: 3.65e-8 kg; lognormal variance with pedigree 0.0408, pedigree (1,3,2,1,1)
  (same comment as for Azoxystrobin)
- MCPA [air, non-urban air or from high stacks]: 8.56e-7 kg; lognormal variance with pedigree 0.0408, pedigree (1,3,2,1,1)
  (same comment as for Azoxystrobin)
- Metalaxyl-M [air, low population density, long-term]: 1.39e-7 kg; lognormal variance with pedigree 0.0408, pedigree (1,3,2,1,1)
  (same comment as for Azoxystrobin)
- Metribuzin [air, non-urban air or from high stacks]: 9.23e-7 kg; lognormal variance with pedigree 0.0408, pedigree (1,3,2,1,1)
  (same comment as for Azoxystrobin)
- Permethrin [air, non-urban air or from high stacks]: 8.94e-8 kg; lognormal variance with pedigree 0.0408, pedigree (1,3,2,1,1)
  (same comment as for Azoxystrobin)
- Propiconazole [air, non-urban air or from high stacks]: 1.88e-7 kg; lognormal variance with pedigree 0.0408, pedigree (1,3,2,1,1)
  (same comment as for Azoxystrobin)
- Prothioconazole [air, non-urban air or from high stacks]: 1.59e-6 kg; lognormal variance with pedigree 0.0408, pedigree (1,3,2,1,1)
  (same comment as for Azoxystrobin)
- Pyraclostrobin [air, non-urban air or from high stacks]: 2.31e-6 kg; lognormal variance with pedigree 0.0408, pedigree (1,3,2,1,1)
  (same comment as for Azoxystrobin)
- Pyraflufen-ethyl [air, unspecified]: 5.53e-9 kg; lognormal variance with pedigree 0.0408, pedigree (1,3,2,1,1)
  (same comment as for Azoxystrobin)
- Quizalofop-ethyl [air, non-urban air or from high stacks]: 3.57e-7 kg; lognormal variance with pedigree 0.0408, pedigree (1,3,2,1,1)
  (same comment as for Azoxystrobin)
- Sethoxydim [air, non-urban air or from high stacks]: 3.59e-6 kg; lognormal variance with pedigree 0.0408, pedigree (1,3,2,1,1)
  (same comment as for Azoxystrobin)
- Tebuconazole [air, non-urban air or from high stacks]: 7.08e-9 kg; lognormal variance with pedigree 0.0408, pedigree (1,3,2,1,1)
  (same comment as for Azoxystrobin)
- Thiamethoxam [air, low population density, long-term]: 8.12e-10 kg; lognormal variance with pedigree 0.0408, pedigree (1,3,2,1,1)
  (same comment as for Azoxystrobin)
- Thiram [air, low population density, long-term]: 2.48e-7 kg; lognormal variance with pedigree 0.0408, pedigree (1,3,2,1,1)
  (same comment as for Azoxystrobin)
- Trifloxystrobin [air, non-urban air or from high stacks]: 1.07e-6 kg; lognormal variance with pedigree 0.0408, pedigree (1,3,2,1,1)
  (same comment as for Azoxystrobin)
- Trifluralin [air, non-urban air or from high stacks]: 3.68e-7 kg; lognormal variance with pedigree 0.0408, pedigree (1,3,2,1,1)
  (same comment as for Azoxystrobin)
- Azoxystrobin [soil, agricultural]: 3.57e-6 kg; lognormal variance with pedigree 0.0338, pedigree (1,3,2,1,1)
  (same comment as for Azoxystrobin)
- Boscalid [soil, agricultural]: 2.35e-5 kg; lognormal variance with pedigree 0.0338, pedigree (1,3,2,1,1)
  (same comment as for Azoxystrobin)
- Cadmium II [soil, agricultural]: 3.30595e-7 kg; lognormal variance with pedigree 0.0419915, pedigree (2,2,2,1,1)
  The heavy metal emissions are calculated by SALCA-heavy metal (Freiermuth 2006) using the ecoinvent LCI calculation tool for crop production.
  Uncertainty: C
- Carboxin [soil, agricultural]: 2.22e-6 kg; lognormal variance with pedigree 0.0338, pedigree (1,3,2,1,1)
  (same comment as for Azoxystrobin)
- Carfentrazone-ethyl [soil, agricultural]: 1.67e-6 kg; lognormal variance with pedigree 0.0338, pedigree (1,3,2,1,1)
  (same comment as for Azoxystrobin)
- Chlorantraniliprole [soil, agricultural]: 3.34e-7 kg; lognormal variance with pedigree 0.0338, pedigree (1,3,2,1,1)
  (same comment as for Azoxystrobin)
- Chlorfenapyr [soil, agricultural]: 9.58e-10 kg; lognormal variance with pedigree 0.0338, pedigree (1,3,2,1,1)
  (same comment as for Azoxystrobin)
- Chlorpyrifos [soil, agricultural]: 7.66e-8 kg; lognormal variance with pedigree 0.0338, pedigree (1,3,2,1,1)
  (same comment as for Azoxystrobin)
- Chromium III [soil, agricultural]: -2.77965e-5 kg
  The heavy metal emissions are calculated by SALCA-heavy metal (Freiermuth 2006) using the ecoinvent LCI calculation tool for crop production.
- Clethodim [soil, agricultural]: 6.69e-6 kg; lognormal variance with pedigree 0.0338, pedigree (1,3,2,1,1)
  (same comment as for Azoxystrobin)
- Copper ion [soil, agricultural]: -2.28772e-5 kg
  (same comment as for Chromium III)
- Deltamethrin [soil, agricultural]: 2.86e-8 kg; lognormal variance with pedigree 0.0338, pedigree (1,3,2,1,1)
  (same comment as for Azoxystrobin)
- Dicamba [soil, agricultural]: 1.35e-7 kg; lognormal variance with pedigree 0.0338, pedigree (1,3,2,1,1)
  (same comment as for Azoxystrobin)
- Diflufenzopyr-sodium [soil, agricultural]: 5.23e-8 kg; lognormal variance with pedigree 0.0338, pedigree (1,3,2,1,1)
  (same comment as for Azoxystrobin)
- Diquat dibromide [soil, agricultural]: 6.12e-6 kg; lognormal variance with pedigree 0.0338, pedigree (1,3,2,1,1)
  (same comment as for Azoxystrobin)
- Ethaboxam [soil, agricultural]: 4.67e-7 kg; lognormal variance with pedigree 0.0338, pedigree (1,3,2,1,1)
  (same comment as for Azoxystrobin)
- Ethalfluralin [soil, agricultural]: 5.64e-5 kg; lognormal variance with pedigree 0.0338, pedigree (1,3,2,1,1)
  (same comment as for Azoxystrobin)
- Fludioxonil [soil, agricultural]: 5.01e-7 kg; lognormal variance with pedigree 0.0338, pedigree (1,3,2,1,1)
  (same comment as for Azoxystrobin)
- Flumioxazin [soil, agricultural]: 7.87e-7 kg; lognormal variance with pedigree 0.0338, pedigree (1,3,2,1,1)
  (same comment as for Azoxystrobin)
- Fluxapyroxad [soil, agricultural]: 8.94e-6 kg; lognormal variance with pedigree 0.0338, pedigree (1,3,2,1,1)
  (same comment as for Azoxystrobin)
- Glufosinate ammonium [soil, agricultural]: 9.75e-7 kg; lognormal variance with pedigree 0.0338, pedigree (1,3,2,1,1)
  (same comment as for Azoxystrobin)
- Glyphosate [soil, agricultural]: 0.000515 kg; lognormal variance with pedigree 0.0338, pedigree (1,3,2,1,1)
  (same comment as for Azoxystrobin)
- Imazamox [soil, agricultural]: 5.88e-6 kg; lognormal variance with pedigree 0.0338, pedigree (1,3,2,1,1)
  (same comment as for Azoxystrobin)
- Imazethapyr [soil, agricultural]: 3.85e-6 kg; lognormal variance with pedigree 0.0338, pedigree (1,3,2,1,1)
  (same comment as for Azoxystrobin)
- Lambda-cyhalothrin [soil, agricultural]: 2.79e-7 kg; lognormal variance with pedigree 0.0338, pedigree (1,3,2,1,1)
  (same comment as for Azoxystrobin)
- Lead II [soil, agricultural]: -5.54289e-6 kg
  (same comment as for Chromium III)
- MCPA [soil, agricultural]: 6.55e-6 kg; lognormal variance with pedigree 0.0338, pedigree (1,3,2,1,1)
  (same comment as for Azoxystrobin)
- Mercury II [soil, agricultural]: -6.31337e-8 kg
  (same comment as for Chromium III)
- Metalaxyl-M [soil, agricultural]: 1.06e-6 kg; lognormal variance with pedigree 0.0338, pedigree (1,3,2,1,1)
  (same comment as for Azoxystrobin)
- Metribuzin [soil, agricultural]: 7.06e-6 kg; lognormal variance with pedigree 0.0338, pedigree (1,3,2,1,1)
  (same comment as for Azoxystrobin)
- Nickel II [soil, agricultural]: -1.14968e-5 kg
  (same comment as for Chromium III)
- Nitrate [soil, unspecified]: 5.11e-5 kg; lognormal variance with pedigree 0.0358, pedigree (3,3,2,1,1)
  (same comment as for Ammonia)
- Penflufen [soil, agricultural]: 4.97e-9 kg; lognormal variance with pedigree 0.0338, pedigree (1,3,2,1,1)
  (same comment as for Azoxystrobin)
- Permethrin [soil, agricultural]: 6.84e-7 kg; lognormal variance with pedigree 0.0338, pedigree (1,3,2,1,1)
  (same comment as for Azoxystrobin)
- Phosphorus [soil, agricultural]: 0.000124 kg; lognormal variance with pedigree 0.0358, pedigree (3,3,2,1,1)
  (same comment as for Ammonia)
- Picoxystrobin [soil, agricultural]: 2.23e-7 kg; lognormal variance with pedigree 0.0338, pedigree (1,3,2,1,1)
  (same comment as for Azoxystrobin)
- Propiconazole [soil, agricultural]: 1.44e-6 kg; lognormal variance with pedigree 0.0338, pedigree (1,3,2,1,1)
  (same comment as for Azoxystrobin)
- Prothioconazole [soil, agricultural]: 1.21e-5 kg; lognormal variance with pedigree 0.0338, pedigree (1,3,2,1,1)
  (same comment as for Azoxystrobin)
- Pyraclostrobin [soil, agricultural]: 1.77e-5 kg; lognormal variance with pedigree 0.0338, pedigree (1,3,2,1,1)
  (same comment as for Azoxystrobin)
- Pyraflufen-ethyl [soil, agricultural]: 4.23e-8 kg; lognormal variance with pedigree 0.0338, pedigree (1,3,2,1,1)
  (same comment as for Azoxystrobin)
- Pyroxasulfone [soil, agricultural]: 7.82e-7 kg; lognormal variance with pedigree 0.0338, pedigree (1,3,2,1,1)
  (same comment as for Azoxystrobin)
- Quizalofop-ethyl [soil, agricultural]: 2.73e-6 kg; lognormal variance with pedigree 0.0338, pedigree (1,3,2,1,1)
  (same comment as for Azoxystrobin)
- Saflufenacil [soil, agricultural]: 2.23e-6 kg; lognormal variance with pedigree 0.0338, pedigree (1,3,2,1,1)
  (same comment as for Azoxystrobin)
- Sedaxane [soil, agricultural]: 7.9e-7 kg; lognormal variance with pedigree 0.0338, pedigree (1,3,2,1,1)
  (same comment as for Azoxystrobin)
- Sethoxydim [soil, agricultural]: 2.75e-5 kg; lognormal variance with pedigree 0.0338, pedigree (1,3,2,1,1)
  (same comment as for Azoxystrobin)
- Tebuconazole [soil, agricultural]: 5.42e-8 kg; lognormal variance with pedigree 0.0338, pedigree (1,3,2,1,1)
  (same comment as for Azoxystrobin)
- Thiamethoxam [soil, agricultural]: 6.21e-9 kg; lognormal variance with pedigree 0.0338, pedigree (1,3,2,1,1)
  (same comment as for Azoxystrobin)
- Thiram [soil, agricultural]: 1.9e-6 kg; lognormal variance with pedigree 0.0338, pedigree (1,3,2,1,1)
  (same comment as for Azoxystrobin)
- Trifloxystrobin [soil, agricultural]: 8.21e-6 kg; lognormal variance with pedigree 0.0338, pedigree (1,3,2,1,1)
  (same comment as for Azoxystrobin)
- Trifluralin [soil, agricultural]: 2.82e-6 kg; lognormal variance with pedigree 0.0338, pedigree (1,3,2,1,1)
  (same comment as for Azoxystrobin)
- Zinc II [soil, agricultural]: -4.57975e-5 kg
  (same comment as for Chromium III)
- Azoxystrobin [water, ground-]: 3.97e-7 kg; lognormal variance with pedigree 0.0408, pedigree (1,3,2,1,1)
  (same comment as for Azoxystrobin)
- Cadmium II [water, ground-]: 2.05262e-8 kg; lognormal variance with pedigree 0.0872596, pedigree (2,2,2,1,1)
  (same comment as for Cadmium II)
- Cadmium II [water, surface water]: 2.15638e-7 kg; lognormal variance with pedigree 0.0872596, pedigree (2,2,2,1,1)
  (same comment as for Cadmium II)
- Carboxin [water, ground-]: 2.46e-7 kg; lognormal variance with pedigree 0.0408, pedigree (1,3,2,1,1)
  (same comment as for Azoxystrobin)
- Carfentrazone-ethyl [water, ground-]: 1.86e-7 kg; lognormal variance with pedigree 0.0408, pedigree (1,3,2,1,1)
  (same comment as for Azoxystrobin)
- Chlorantraniliprole [water, ground-]: 3.71e-8 kg; lognormal variance with pedigree 0.0408, pedigree (1,3,2,1,1)
  (same comment as for Azoxystrobin)
- Chlorpyrifos [water, ground-]: 8.51e-9 kg; lognormal variance with pedigree 0.0408, pedigree (1,3,2,1,1)
  (same comment as for Azoxystrobin)
- Chromium III [water, ground-]: 1.04298e-5 kg; lognormal variance with pedigree 0.0872596, pedigree (2,2,2,1,1)
  (same comment as for Cadmium II)
- Chromium III [water, surface water]: 2.59498e-5 kg; lognormal variance with pedigree 0.0872596, pedigree (2,2,2,1,1)
  (same comment as for Cadmium II)
- Clethodim [water, ground-]: 7.43e-7 kg; lognormal variance with pedigree 0.0408, pedigree (1,3,2,1,1)
  (same comment as for Azoxystrobin)
- Copper ion [water, ground-]: 1.4105e-6 kg; lognormal variance with pedigree 0.0872596, pedigree (2,2,2,1,1)
  (same comment as for Cadmium II)
- Copper ion [water, surface water]: 1.72362e-5 kg; lognormal variance with pedigree 0.0872596, pedigree (2,2,2,1,1)
  (same comment as for Cadmium II)
- Deltamethrin [water, ground-]: 3.18e-9 kg; lognormal variance with pedigree 0.0408, pedigree (1,3,2,1,1)
  (same comment as for Azoxystrobin)
- Dicamba [water, ground-]: 1.5e-8 kg; lognormal variance with pedigree 0.0408, pedigree (1,3,2,1,1)
  (same comment as for Azoxystrobin)
- Diflufenzopyr [water, ground-]: 5.81e-9 kg; lognormal variance with pedigree 0.0408, pedigree (1,3,2,1,1)
  (same comment as for Azoxystrobin)
- Diquat dibromide [water, ground-]: 6.8e-7 kg; lognormal variance with pedigree 0.0408, pedigree (1,3,2,1,1)
  (same comment as for Azoxystrobin)
- Ethaboxam [water, ground-]: 5.19e-8 kg; lognormal variance with pedigree 0.0408, pedigree (1,3,2,1,1)
  (same comment as for Azoxystrobin)
- Ethalfluralin [water, ground-]: 6.27e-6 kg; lognormal variance with pedigree 0.0408, pedigree (1,3,2,1,1)
  (same comment as for Azoxystrobin)
- Fludioxonil [water, ground-]: 5.57e-8 kg; lognormal variance with pedigree 0.0408, pedigree (1,3,2,1,1)
  (same comment as for Azoxystrobin)
- Flumioxazin [water, ground-]: 8.75e-8 kg; lognormal variance with pedigree 0.0408, pedigree (1,3,2,1,1)
  (same comment as for Azoxystrobin)
- Fluxapyroxad [water, ground-]: 9.93e-7 kg; lognormal variance with pedigree 0.0408, pedigree (1,3,2,1,1)
  (same comment as for Azoxystrobin)
- Glufosinate ammonium [water, ground-]: 1.08e-7 kg; lognormal variance with pedigree 0.0408, pedigree (1,3,2,1,1)
  (same comment as for Azoxystrobin)
- Glyphosate [water, ground-]: 5.72e-5 kg; lognormal variance with pedigree 0.0408, pedigree (1,3,2,1,1)
  (same comment as for Azoxystrobin)
- Imazamox [water, ground-]: 6.54e-7 kg; lognormal variance with pedigree 0.0408, pedigree (1,3,2,1,1)
  (same comment as for Azoxystrobin)
- Imazethapyr [water, ground-]: 4.27e-7 kg; lognormal variance with pedigree 0.0408, pedigree (1,3,2,1,1)
  (same comment as for Azoxystrobin)
- Lambda-cyhalothrin [water, ground-]: 3.1e-8 kg; lognormal variance with pedigree 0.0408, pedigree (1,3,2,1,1)
  (same comment as for Azoxystrobin)
- Lead II [water, ground-]: 2.15628e-7 kg; lognormal variance with pedigree 0.0872596, pedigree (2,2,2,1,1)
  (same comment as for Cadmium II)
- Lead II [water, surface water]: 1.53378e-5 kg; lognormal variance with pedigree 0.0872596, pedigree (2,2,2,1,1)
  (same comment as for Cadmium II)
- MCPA [water, ground-]: 7.28e-7 kg; lognormal variance with pedigree 0.0408, pedigree (1,3,2,1,1)
  (same comment as for Azoxystrobin)
- Mercury II [water, ground-]: 2.43713e-10 kg; lognormal variance with pedigree 0.0872596, pedigree (2,2,2,1,1)
  (same comment as for Cadmium II)
- Mercury II [water, surface water]: 2.99525e-8 kg; lognormal variance with pedigree 0.0872596, pedigree (2,2,2,1,1)
  (same comment as for Cadmium II)
- Metalaxyl-M [water, ground-]: 1.18e-7 kg; lognormal variance with pedigree 0.0408, pedigree (1,3,2,1,1)
  (same comment as for Azoxystrobin)
- Metribuzin [water, ground-]: 7.85e-7 kg; lognormal variance with pedigree 0.0408, pedigree (1,3,2,1,1)
  (same comment as for Azoxystrobin)
- Nickel II [water, surface water]: 1.12906e-5 kg; lognormal variance with pedigree 0.0872596, pedigree (2,2,2,1,1)
  (same comment as for Cadmium II)
- Penflufen [water, ground-]: 5.52e-10 kg; lognormal variance with pedigree 0.0408, pedigree (1,3,2,1,1)
  (same comment as for Azoxystrobin)
- Permethrin [water, unspecified]: 7.6e-8 kg; lognormal variance with pedigree 0.0408, pedigree (1,3,2,1,1)
  (same comment as for Azoxystrobin)
- Phosphorus [water, ground-]: 0.00032 kg; lognormal variance with pedigree 0.0428, pedigree (3,3,2,1,1)
  (same comment as for Ammonia)
- Propiconazole [water, ground-]: 1.6e-7 kg; lognormal variance with pedigree 0.0408, pedigree (1,3,2,1,1)
  (same comment as for Azoxystrobin)
- Prothioconazole [water, ground-]: 1.35e-6 kg; lognormal variance with pedigree 0.0408, pedigree (1,3,2,1,1)
  (same comment as for Azoxystrobin)
- Pyraclostrobin [water, ground-]: 1.97e-6 kg; lognormal variance with pedigree 0.0408, pedigree (1,3,2,1,1)
  (same comment as for Azoxystrobin)
- Pyroxasulfone [water, ground-]: 8.69e-8 kg; lognormal variance with pedigree 0.0408, pedigree (1,3,2,1,1)
  (same comment as for Azoxystrobin)
- Quizalofop-ethyl [water, ground-]: 3.03e-7 kg; lognormal variance with pedigree 0.0408, pedigree (1,3,2,1,1)
  (same comment as for Azoxystrobin)
- Saflufenacil [water, ground-]: 2.48e-7 kg; lognormal variance with pedigree 0.0408, pedigree (1,3,2,1,1)
  (same comment as for Azoxystrobin)
- Sedaxane [water, ground-]: 8.78e-8 kg; lognormal variance with pedigree 0.0408, pedigree (1,3,2,1,1)
  (same comment as for Azoxystrobin)
- Sethoxydim [water, ground-]: 3.05e-6 kg; lognormal variance with pedigree 0.0408, pedigree (1,3,2,1,1)
  (same comment as for Azoxystrobin)
- Tebuconazole [water, ground-]: 6.02e-9 kg; lognormal variance with pedigree 0.0408, pedigree (1,3,2,1,1)
  (same comment as for Azoxystrobin)
- Thiamethoxam [water, ground-]: 6.91e-10 kg; lognormal variance with pedigree 0.0408, pedigree (1,3,2,1,1)
  (same comment as for Azoxystrobin)
- Thiram [water, ground-]: 2.11e-7 kg; lognormal variance with pedigree 0.0408, pedigree (1,3,2,1,1)
  (same comment as for Azoxystrobin)
- Trifloxystrobin [water, ground-]: 9.13e-7 kg; lognormal variance with pedigree 0.0408, pedigree (1,3,2,1,1)
  (same comment as for Azoxystrobin)
- Trifluralin [water, ground-]: 3.13e-7 kg; lognormal variance with pedigree 0.0408, pedigree (1,3,2,1,1)
  (same comment as for Azoxystrobin)
- Zinc II [water, ground-]: 9.36479e-6 kg; lognormal variance with pedigree 0.0872596, pedigree (2,2,2,1,1)
  (same comment as for Cadmium II)
- Zinc II [water, surface water]: 3.08064e-5 kg; lognormal variance with pedigree 0.0872596, pedigree (2,2,2,1,1)
  (same comment as for Cadmium II)

## Sampling procedure
Site-specific field data were collected via survey from prairie province lentil producers for crop rotation, seeding rate, machinery and fuel use for field operations (e.g., tillage, harrowing, harvest), farm inputs (e.g., fertilizers, pesticides), and electricity for crop drying. Production weighted averages were calculated for the region. Outliers were removed from reported fuel use data based on visual inspection.

## Extrapolations
Geographical location of each farm was used to identify the Reconciliation Units (soil and climate based provincial divisions) identified by Agriculture and Agri-Food Canada (AAFC) and AAFC Reporting Zone (ecozone) to which each farm belongs. Production-weighted average datasets were calculated for each ecozone.

## Review by Jens Lansche 2021-02-02
All comments from the previous reviews have been taken into account in the current version.
