# treatment of wastewater, average, wastewater treatment

Dataset: EcoSpold 2, unit process
Geography: RoW
Time period: 2010-01-01 to 2022-12-31
Technology level: current
Classification: ISIC rev.4 ecoinvent: 3700:Sewerage
Scenario: Business-as-Usual
System model: Allocation at the point of substitution
Generated by: Nikolia Stoikou
Database: ecoinvent
isCopyrightProtected: true

## General comment
This dataset represents the treatment of a wastewater, generated from an ordinary transforming activity. Purification in wastewater treatment of 'wastewater, average'. Recommended use of this dataset: to be used for wastewaters, generated from ordinary transforming activities, of equal or similar composition. The wastewater has a content of TOC: 0.1091 kg/m3, COD: 0.42534 kg/m3 and BOD: 0.20572 kg/m3. TOC is equal to C present in the wastewater, COD is calculated as TOC/0.2565 and BOD is calculated as COD/0.53034. Detailed elemental composition can be found in the properties of the wastewater treated. Share of biogenic carbon in the sludge: 100%.

## Included activities start
The activity starts with the wastewater being available at the gate of the treatment facility. Collection and transportation of the wastewater to the treatment plant is not included.

## Included activities end
The activity ends with the wastewater being treated and waste-specific emissions released to the environment. Expenditures from treatment of wastewater in waste treatment plant are included as well as relevant infrastructure of the plant. Emissions from any sludge digestion, biogas generation and utilization (heeding specific wastewater composition) are also included. Waste-specific direct emissions of untreated wastewater and required territory-specific infrastructure for sewers are not contained within this dataset but instead in the regional market datasets for this wastewater.

## Geography
The site has mean annual temperature (MAT) of 16.743579766537 degC, mean annual precipitation (MAP) of 1250.84108527132 mm/year, mean annual actual evaporation (EAT) of 460.58904958214 mm/year. In the WWT plant, 0% of its water input are lost due to evaporation from pools, 0.00537% of water is *gained* from organic mass degradation, and 0.00471% is removed off site via sludge disposal. (References: UN data, 2020. Precipitation, Environment Statistics Database, United Nations Statistics Division Available at: http://data.un.org/Data.aspx?q=precipitation&d=ENV&f=variableID%3a6; World Bank, 2022. Surface area (sq.km), World Bank Group Available at: https://data.worldbank.org/indicator/AG.SRF.TOTL.K2; Doka G.,2021. A model for composition-specific life cycle inventories of regionalised wastewater fates, Zurich, Switzerland. http://www.doka.ch/publications.htm)

## Technology
This is an inventory for the disposal of a selected wastewater in Global. The reference unit is 1 m3 wastewater input. This activity represents the treatment of a specific wastewater in a WWT plant (while direct emissions and sewering are heeded in the upstream market dataset for this wastewater). The size of the treatment plant infrastructure is for a supranational region average territory situation. The assumed size of the WWTP treats 82.2 Mio m3 per year. The mixture of WWTP with one, two, or three stages is 8.2%-41.2%-50.6%. The actual, waste-specific oxygen requirement in the biological stages is 0.07512176 kg O. The digestion process produces 11.627765 litres of biogas with an energy content of 0.2498615MJ. 60.5% of the biogas is utilized for energy. The remainder is flared. The gross electric efficiency is 26.564%. The gross thermal efficiency is 47.853%. After digestion, the remaining total sludge mass (dry matter) is 0.1095kg DM.

## Reference product
- iron scrap, sorted, pressed: 1 kg; By-product classification Recyclable; CPC 39310: Slag, dross, scalings and other waste from the manufacture of iron or steel; lognormal variance with pedigree 0.3611, pedigree (1,1,1,1,1)
  scrap output from used infrastructure for wastewater treatment plant.
  Uncertainty: Uncertainty calculated from wastewater technosphere fate uncertainty and treatment infrastructure uncertainty.
  production volume 1.24645e7 kg
    Calculated in proportion to wastewater reference product.
  property price 0.175 EUR2005
    Temporary price data. Calculated as 90% of purchasers price based on: 2005 import and export prices (total trades (USD) divided by total weight (kg) in biggest economies of the world: EU27, USA, Brasil, China, India, Japan and Russia) from UN Commodity Trade Statistics Database (http://data.un.org/Explorer.aspxDatabase [Accessed 2011.06.20]). Commodity: Waste or scrap, of cast iron
  properties: carbon allocation 0 kg, carbon content 0, carbon content, fossil 0, carbon content, non-fossil 0, dry mass 1 kg, water content 0, water in wet mass 0 kg, wet mass 1 kg

## Inputs from technosphere
- 1,1-difluoroethane, HFC-152a: 2.75557e-9 kg
- Distiller's Dried Grains with Solubles: -0.000121138 kg
- EUR-flat pallet: 4.00811e-9, 1.82187e-9 unit (2 suppliers, which the file names only by identifier); sum of these 5.82998e-9 unit
- acetic acid, without water, in 98% solution state: 1.44738e-5 kg
- acrylic acid: 4.72304e-10, 2.24209e-9 kg (2 suppliers, which the file names only by identifier); sum of these 2.71439e-9 kg
- acrylic dispersion, with water, in 58% solution state: 5.51198e-11 kg
- acrylic varnish, with water, in 53% solution state: 3.902e-8 kg
- activated carbon, granular: 3.88756e-8 kg
- aluminium casting facility: 1.90491e-16 unit
- aluminium hydroxide: 5.3035e-8 kg
- aluminium hydroxide factory: 1.54329e-14 unit
- aluminium oxide factory: 3.1698e-13 unit
- aluminium oxide, non-metallurgical: 7.79404e-7, 4.6037e-6 kg (2 suppliers, which the file names only by identifier); sum of these 5.38311e-6 kg
- aluminium scrap, new: -6.69613e-7, -6.69613e-7 kg (2 suppliers, which the file names only by identifier); sum of these -1.33923e-6 kg
- aluminium sulfate, powder: 3.71245e-8 kg
- aluminium, cast alloy: 2.59638e-7 kg
- aluminium, primary, ingot: 1.154e-6, 2.09349e-7, 2.05924e-9 kg (3 suppliers, which the file names only by identifier); sum of these 1.36541e-6 kg
- aluminium, wrought alloy: 1.1378e-6 kg
- ammonia, anhydrous, liquid: 3.98454e-7, 4.17622e-8, 8.76595e-7, 3.99919e-7, 1.53484e-6, 2.05261e-7, 1.86724e-7, 4.4166e-6, 1.31938e-7 kg (9 suppliers, which the file names only by identifier); sum of these 8.19209e-6 kg
- ammonium bicarbonate: 0.00272786, 7.52455e-5 kg (2 suppliers, which the file names only by identifier); sum of these 0.0028031 kg
- ammonium nitrate: 3.8497e-7, 5.55083e-7, 2.95891e-7, 1.00447e-6 kg (4 suppliers, which the file names only by identifier); sum of these 2.24041e-6 kg
- ammonium sulfate: 0.000234711, 0.00624471 kg (2 suppliers, which the file names only by identifier); sum of these 0.00647942 kg
- anode, for metal electrolysis: 6.8211e-6 kg
- antimony: 2.3071e-9 kg
- argon, liquid: 1.86443e-6 kg
- average incineration residue: -1.34415e-7 kg
- barite: 0.0046437 kg
- basic oxygen furnace dust: -6.85488e-8, -1.02182e-6 kg (2 suppliers, which the file names only by identifier); sum of these -1.09037e-6 kg
- basic oxygen furnace secondary metallurgy slag: -1.58468e-8 kg
- basic oxygen furnace slag: -2.04812e-5 kg
- basic oxygen furnace sludge: -1.58468e-8 kg
- basic oxygen furnace waste: -6.1314e-6 kg
- bauxite: 2.4428e-5 kg
- bentonite: 0.0046438 kg
- benzaldehyde: 1.23644e-7, 6.10624e-8 kg (2 suppliers, which the file names only by identifier); sum of these 1.84706e-7 kg
- biowaste: -2.22641e-6, -1.96087e-8 kg (2 suppliers, which the file names only by identifier); sum of these -2.24602e-6 kg
- bisphenol A, powder: 2.56435e-5 kg
- blast furnace: 1.05332e-13 unit
- blast furnace gas: -0.034342 MJ
- blast furnace slag: -0.00318373 kg
- blast furnace sludge: -2.39476e-6, -1.40068e-6, -1.5768e-5, -0.000126757 kg (4 suppliers, which the file names only by identifier); sum of these -0.000146321 kg
- blast oxygen furnace converter: 1.56261e-15 unit
- blasting: 1.04824e-5 kg
- borax, anhydrous, powder: 8.5011e-9 kg
- building, budget hotel: 1.69479e-12 unit
- building, hall: 6.22251e-9 m2
- building, luxury hotel: 5.21489e-14 unit
- building, multi-storey: 1.499e-9 m3
- butadiene: 1.59641e-11 kg
- calcium carbide, technical grade: 3.56523e-7 kg
- calcium chloride: 2.65175e-8 kg
- calcium nitrate: 3.2614e-8 kg
- carbon dioxide, liquid: 1.28655e-5, 2.69569e-6 kg (2 suppliers, which the file names only by identifier); sum of these 1.55612e-5 kg
- carbon disulfide: 1.21498e-7 kg
- cast iron: 8.2296e-8 kg
- cellulose fibre: 0.00406324 kg
- cement, Portland: 0.0424145, 0.00103616, 0.00156048, 0.0016011, 0.000182855, 1.58177e-7, 0.00199034, 0.000205479 kg (8 suppliers, which the file names only by identifier); sum of these 0.0489911 kg
- charcoal: 2.44784e-9 kg
- chemical factory, organics: 3.87323e-13 unit
- chemical, inorganic: 1.46649e-6 kg
- chemical, organic: 0.00465193 kg
- chlorine, gaseous: 4.11807e-5, 3.2817e-8 kg (2 suppliers, which the file names only by identifier); sum of these 4.12135e-5 kg
- chlorine, liquid: 3.15877e-6, 3.6687e-8 kg (2 suppliers, which the file names only by identifier); sum of these 3.19546e-6 kg
- chromite ore concentrate: 0.000246723 kg
- chromium oxide, flakes: 6.95823e-9 kg
- citric acid: 0.000934368 kg
- clay: 3.12202e-11, 2.03393e-7 kg (2 suppliers, which the file names only by identifier); sum of these 2.03424e-7 kg
- cleaning consumables, without water, in 13.6% solution state: 1.09604e-9 kg
- coal gas: -0.00166998 MJ
- coal tar: -1.22008e-5 kg
- coating powder: 1.21827e-8 kg
- cobalt: 5.72097e-8 kg
- coffee maker: 3.01152e-11 unit
- coke: 0.118571 MJ
- compact fluorescent lamp: 2.65865e-8 unit
- compressed air, 600 kPa gauge: 0.000125822 m3
- compressed air, 800 kPa gauge: 6.48478e-5, 1.68584e-5 m3 (2 suppliers, which the file names only by identifier); sum of these 8.17063e-5 m3
- computer, laptop: 7.04338e-11 unit
- containerboard, fluting medium: 4.3445e-6 kg
- containerboard, linerboard: 5.43848e-6 kg
- containerboard, unspecified: 2.61603e-5 kg
- conveyor belt: 2.944e-9 m
- cookstove: 1.00384e-11 unit
- copper cake: -1.45477e-5 kg
- copper, cathode: 1.64793e-8 kg
- corrugated board box: 3.31937e-8, 7.70459e-8 kg (2 suppliers, which the file names only by identifier); sum of these 1.1024e-7 kg
- decarbonising waste: -7.66351e-6 kg
- diesel: 5.25052e-8, 7.17524e-12, 1.46613e-12, 1.20962e-5, 1.01435e-12, 1.42995e-10, 3.44943e-13 kg (7 suppliers, which the file names only by identifier); sum of these 1.21488e-5 kg
- diesel, burned in building machine: 0.000507487 MJ
- diesel, burned in diesel-electric generating set, 10MW: 0.0261763 MJ
- diesel, burned in diesel-electric generating set, 18.5kW: 1.4754e-6 MJ
- diesel, low-sulfur: 6.84904e-11, 1.65065e-9, 3.10188e-11, 4.58573e-12, 1.38239e-10, 6.91425e-11 kg (6 suppliers, which the file names only by identifier); sum of these 1.96213e-9 kg
- diethylene glycol: 3.54509e-8 kg
- dimethyldichlorosilane: 3.82566e-11 kg
- dishwasher: 1.20461e-11 unit
- dolomite: 0.00116388 kg
- drilling waste: -0.108198 kg
- electric arc furnace converter: 1.76267e-13 unit
- electric arc furnace dust: -3.8588e-5, -1.92288e-5 kg (2 suppliers, which the file names only by identifier); sum of these -5.78168e-5 kg
- electric arc furnace secondary metallurgy slag: -2.83101e-5 kg
- electric arc furnace slag: -6.66198e-7, -0.000251448 kg (2 suppliers, which the file names only by identifier); sum of these -0.000252115 kg
- electricity, high voltage: 8.37444e-8, 1.138e-6, 1.0158e-8, 6.04634e-8, 1.11067e-6, 2.42585e-7, 1.77296e-8, 3.04092e-7, 3.55145e-7, 6.51436e-9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 kWh (46 suppliers, which the file names only by identifier); sum of these 2.54285e-5 kWh
- electricity, low voltage: 2.90474e-8, 2.51035e-7, 7.88636e-9, 2.62413e-8, 4.11649e-9, 3.53337e-8, 2.18168e-9, 2.43014e-8, 1.34077e-7, 4.76762e-7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 kWh (81 suppliers, which the file names only by identifier); sum of these 0.0223832 kWh
- electricity, medium voltage: 0.00164957, 0.00222734, 0.00214512, 0.00320334, 0.000668673, 0.00603732, 0.000497401, 0.000677395, 0.000660661, 0.00057712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 kWh (165 suppliers, which the file names only by identifier); sum of these 0.921974 kWh
- electricity, medium voltage, cobalt industry: 0.00946316 kWh
- electrode, negative, Ni: 3.57583e-6 kg
- energy and auxilliary inputs, metal working factory: 2.57984e-16, 5.75299e-17 kg (2 suppliers, which the file names only by identifier); sum of these 3.15514e-16 kg
- epoxy resin, liquid: 1.05374e-9, 2.21975e-10 kg (2 suppliers, which the file names only by identifier); sum of these 1.27572e-9 kg
- ethanol fermentation plant: 5.83609e-14 unit
- ethanol, without water, in 99.7% solution state, from ethylene: 2.27512e-8, 5.066e-8 kg (2 suppliers, which the file names only by identifier); sum of these 7.34112e-8 kg
- ethoxylated alcohol (AE7): 1.04649e-8, 4.96783e-8 kg (2 suppliers, which the file names only by identifier); sum of these 6.01433e-8 kg
- ethylene: 0.000162419, 2.60597e-6 kg (2 suppliers, which the file names only by identifier); sum of these 0.000165025 kg
- ethylene dichloride: 1.34124e-5 kg
- ethylene glycol: 2.88447e-6 kg
- ethylene vinyl acetate copolymer: 5.54046e-9 kg
- excavation, hydraulic digger: 0.000747494 m3
- explosive, tovex: 5.22005e-7 kg
- extrusion, plastic film: 1.58077e-10 kg
- extrusion, plastic pipes: 6.60287e-5 kg
- fatty acid: 1.11685e-7 kg
- fatty alcohol: 1.86142e-8 kg
- feldspar: 1.31514e-6 kg
- ferrochromium, high-carbon, 68% Cr: 5.70558e-6 kg
- ferromanganese, high-coal, 74.5% Mn: 1.99746e-5 kg
- ferronickel: 2.37069e-6 kg
- ferrosilicon: 4.26934e-5 kg
- fibre, cotton: 2.91237e-5 kg
- fibre, silk, short: 3.48498e-7 kg
- flat glass factory: 1.69603e-15 unit
- fluorspar, 97% purity: 2.49557e-7 kg
- fly ash and scrubber sludge: -4.23341e-9, -3.57654e-7, -1.41079e-7 kg (3 suppliers, which the file names only by identifier); sum of these -5.02966e-7 kg
- formaldehyde: 8.9062e-7 kg
- furniture, wooden: 1.31019e-7 kg
- glass cullet, sorted: 7.7071e-6 kg
- hair dryer: 3.02456e-9 unit
- hard coal: 0.000186059, 8.17798e-5, 3.70818e-5, 1.57393e-6, 0.000380187, 3.78411e-5, 2.77392e-5, 5.31166e-5, 1.60923e-5, 8.79924e-6 kg (10 suppliers, which the file names only by identifier); sum of these 0.000830271 kg
- hard coal coke factory: 6.48165e-15 unit
- hazardous waste, for incineration: -0.010735, -7.09591e-7, -1.85483e-8 kg (3 suppliers, which the file names only by identifier); sum of these -0.0107357 kg
- hazardous waste, for underground deposit: -2.62657e-6, -2.39628e-8 kg (2 suppliers, which the file names only by identifier); sum of these -2.65053e-6 kg
- heat and power co-generation unit, 6400kW thermal, building: 1.96188e-12 unit
- heat and power co-generation unit, 6400kW thermal, common components for heat+electricity: 7.85577e-12 unit
- heat and power co-generation unit, 6400kW thermal, components for electricity only: 7.85577e-12 unit
- heat, district or industrial, natural gas: 6.55577e-6, 0.000581164, 0.00505118, 0.000644466, 0.000639031, 0.396734, 0.000266859, 0.00649356 MJ (8 suppliers, which the file names only by identifier); sum of these 0.410417 MJ
- heat, district or industrial, other than natural gas: 0.153371, 0.000991617, 4.36047e-7, 3.46809e-11, 7.10502e-5, 0.00109969 MJ (6 suppliers, which the file names only by identifier); sum of these 0.155533 MJ
- heat, from steam, in chemical industry: 0.00101999 MJ
- heavy fuel oil: 1.5792e-5, 1.32883e-7, 1.5951e-6, 8.75954e-7, 1.70469e-7, 2.28198e-7, 3.10095e-6 kg (7 suppliers, which the file names only by identifier); sum of these 2.18955e-5 kg
- hexane: 1.52246e-6 kg
- hydrochloric acid, without water, in 30% solution state: 6.66867e-7, 1.97151e-5 kg (2 suppliers, which the file names only by identifier); sum of these 2.03819e-5 kg
- hydrogen peroxide, without water, in 50% solution state: 3.76181e-7, 4.4694e-8 kg (2 suppliers, which the file names only by identifier); sum of these 4.20875e-7 kg
- hydrogen sulfide: 4.33955e-6, 9.14141e-7 kg (2 suppliers, which the file names only by identifier); sum of these 5.25369e-6 kg
- hydrogen, liquid: 1.85186e-7, 8.88657e-7 kg (2 suppliers, which the file names only by identifier); sum of these 1.07384e-6 kg
- ilmenite, 54% titanium dioxide: 3.70263e-6 kg
- inert waste: -0.000639203, -5.50526e-6, -0.00225477 kg (3 suppliers, which the file names only by identifier); sum of these -0.00289948 kg
- inert waste, for final disposal: -3.6095e-7, -0.000204046 kg (2 suppliers, which the file names only by identifier); sum of these -0.000204406 kg
- inorganic nitrogen fertiliser, as N: 1.32561e-8, 1.2485e-9, 3.42142e-9, 1.51646e-10, 9.73976e-10, 3.58089e-10, 3.42533e-10, 2.85627e-10, 1.08974e-9, 3.59105e-10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 kg (30 suppliers, which the file names only by identifier); sum of these 1.13061e-6 kg
- iron ore concentrate: 3.28155e-8, 0.0135585 kg (2 suppliers, which the file names only by identifier); sum of these 0.0135586 kg
- iron ore, crude ore, 63% Fe: 0.00272609 kg
- iron pellet: 0.00312843 kg
- iron scrap, sorted, pressed: 0.00217647 kg
- iron scrap, unsorted: 6.14473e-5 kg
- iron sinter: 0.00726807 kg
- iron sulfate: 3.12093e-8, 1.66741e-9 kg (2 suppliers, which the file names only by identifier); sum of these 3.28767e-8 kg
- isobutanol: 4.63596e-9, 1.11718e-8 kg (2 suppliers, which the file names only by identifier); sum of these 1.58078e-8 kg
- isopropanol: 1.25555e-6, 2.64486e-7 kg (2 suppliers, which the file names only by identifier); sum of these 1.52004e-6 kg
- kaolin: 4.77369e-6 kg
- kerosene: 5.61844e-10, 9.50368e-8, 3.36657e-9, 1.94495e-8, 1.06806e-8, 7.13385e-10, 1.38256e-9, 9.15083e-10 kg (8 suppliers, which the file names only by identifier); sum of these 1.32106e-7 kg
- leach residue from copper production: -5.21077e-5 kg
- light fuel oil: 4.26698e-7, 3.77079e-8, 3.62567e-9, 7.47254e-8, 2.69447e-9, 2.50225e-9, 1.86836e-8 kg (7 suppliers, which the file names only by identifier); sum of these 5.66637e-7 kg
- lime: 3.92686e-5, 0.00164596 kg (2 suppliers, which the file names only by identifier); sum of these 0.00168522 kg
- lime, hydrated, loose weight: 2.44748e-8, 2.88331e-6 kg (2 suppliers, which the file names only by identifier); sum of these 2.90778e-6 kg
- lime, hydrated, packed: 6.41724e-7 kg
- lime, packed: 3.10795e-8, 5.31674e-6 kg (2 suppliers, which the file names only by identifier); sum of these 5.34782e-6 kg
- limestone residue: -0.000286539 kg
- limestone, crushed, for mill: 7.15294e-6, 1.60057e-8, 3.41756e-8 kg (3 suppliers, which the file names only by identifier); sum of these 7.20312e-6 kg
- limestone, crushed, washed: 7.77552e-5, 6.62986e-7 kg (2 suppliers, which the file names only by identifier); sum of these 7.84182e-5 kg
- limestone, unprocessed: 0.00113179 kg
- liquefied petroleum gas: 3.2536e-8, 2.27336e-9, 1.61129e-6, 3.38793e-9, 1.02139e-8, 4.9823e-7 kg (6 suppliers, which the file names only by identifier); sum of these 2.15794e-6 kg
- lithium fluoride: 3.82566e-11 kg
- lubricating oil: 0.000217095, 5.55727e-7 kg (2 suppliers, which the file names only by identifier); sum of these 0.000217651 kg
- magnesium oxide: 2.62952e-6 kg
- maize grain: 1.33754e-5, 9.33969e-8, 0.000540649 kg (3 suppliers, which the file names only by identifier); sum of these 0.000554118 kg
- maize starch: 6.48186e-7 kg
- mandarin: 1.13923e-5 kg
- manganese: 1.19203e-7 kg
- manganese sulfate: 1.2417e-8 kg
- mattress: 3.70301e-9 unit
- metal working factory: 3.15514e-16 unit
- methyl ethyl ketone: 2.98533e-9, 1.12652e-9 kg (2 suppliers, which the file names only by identifier); sum of these 4.11184e-9 kg
- methylcyclopentane: 5.51115e-9 kg
- microwave oven: 2.93338e-12 unit
- mill scale: -3.49282e-9 kg
- mine infrastructure, iron: 4.30249e-15 unit
- mine infrastructure, open cast, non-ferrous metal: 8.23078e-14 unit
- mine infrastructure, underground, non-ferrous metal: 1.53019e-14 unit
- molybdenite: 3.14243e-8 kg
- molybdenum: 1.20877e-10 kg
- molybdenum trioxide: 2.25933e-8 kg
- municipal solid waste: -8.85747e-5, -7.06998e-8, -1.04151e-9, -3.18947e-5, -0.0626573, -2.23187e-5 kg (6 suppliers, which the file names only by identifier); sum of these -0.0628002 kg
- municipal waste collection service by 21 metric ton lorry: 7.57172e-9 metric ton*km
- naphtha: 2.68863e-7, 1.26747e-5, 2.0557e-6, 5.57579e-7, 2.14668e-8, 8.85921e-8, 2.82961e-6 kg (7 suppliers, which the file names only by identifier); sum of these 1.84965e-5 kg
- natural gas, high pressure: 3.08838e-7, 1.30362e-7, 7.46616e-7, 2.21567e-7, 1.25342e-5, 1.2811e-6, 3.32696e-8, 1.39842e-7, 4.12655e-9, 4.96559e-7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 m3 (27 suppliers, which the file names only by identifier); sum of these 3.77581e-5 m3
- natural gas, low pressure: 1.86586e-6, 6.70035e-7, 5.59913e-7, 1.45329e-6, 1.37574e-6, 2.85876e-5, 1.40676e-6, 1.22219e-6, 2.69875e-7, 1.31308e-5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 m3 (14 suppliers, which the file names only by identifier); sum of these 5.29369e-5 m3
- nickel concentrate, 7% Ni: 0.000256759 kg
- nickel smelter slag: -0.00073923 kg
- nickel, class 1: 5.41624e-8 kg
- nitric acid, without water, in 50% solution state: 7.65103e-9, 9.95341e-8, 1.13682e-8, 2.82707e-8, 3.67652e-8, 1.35458e-8, 4.65889e-8, 1.22824e-8, 1.13262e-8, 7.11209e-9 kg (10 suppliers, which the file names only by identifier); sum of these 2.74445e-7 kg
- nitrogen, liquid: 0.000386462, 3.44418e-6 kg (2 suppliers, which the file names only by identifier); sum of these 0.000389907 kg
- non-ferrous metal smelter: 1.47013e-15 unit
- non-sulfidic overburden, off-site: -2.25977 kg
- non-sulfidic tailing, off-site: -0.000571024 kg
- nylon 6: 9.07369e-9 kg
- oil mill: 4.98921e-13 unit
- oxygen, liquid: 1.17291e-6, 0.000657887 kg (2 suppliers, which the file names only by identifier); sum of these 0.00065906 kg
- packaging box factory: 4.65409e-14 unit
- packaging film, low density polyethylene: 1.37401e-7 kg
- palm fruit bunch: 0.00115382, 0.00111009 kg (2 suppliers, which the file names only by identifier); sum of these 0.00226391 kg
- paraffin: 1.49779e-10 kg
- perlite: 3.72375e-10 kg
- petrol, unleaded: 1.4328e-14, 4.41746e-12, 5.36008e-14, 5.94073e-14, 1.43747e-14, 2.95144e-15 kg (6 suppliers, which the file names only by identifier); sum of these 4.56212e-12 kg
- petroleum: 1.37446e-6, 2.456e-6, 6.17155e-9, 1.17558e-5 kg (4 suppliers, which the file names only by identifier); sum of these 1.55924e-5 kg
- petroleum coke: 8.70307e-6 kg
- phenol: 2.84302e-7 kg
- phenolic resin: 8.30025e-9 kg
- phenyl isocyanate: 7.44006e-8 kg
- phosgene, liquid: 1.11115e-5 kg
- phosphoric acid, fertiliser grade, without water, in 70% solution state: 5.56659e-8 kg
- phosphoric acid, industrial grade, without water, in 85% solution state: 4.46066e-7 kg
- pig iron: 0.00111422, 0.000387797 kg (2 suppliers, which the file names only by identifier); sum of these 0.00150201 kg
- polyacrylamide: 8.84612e-8 kg
- polyethylene terephthalate, granulate, amorphous: 0.000458059 kg
- polyol: 1.82195e-8, 3.68921e-8 kg (2 suppliers, which the file names only by identifier); sum of these 5.51116e-8 kg
- polypropylene, granulate: 9.26195e-6 kg
- polystyrene, high impact: 1.17367e-7 kg
- polyvinylchloride, suspension polymerised: 6.22966e-5 kg
- potassium carbonate: 0.00348278 kg
- potassium hydroxide: 1.05438e-7 kg
- potato starch: 1.97648e-8 kg
- printing ink, offset, without solvent, in 47.5% solution state: 4.71261e-8 kg
- process-specific burdens, inert material landfill: 1.20717e-5, 1.02469e-7 kg (2 suppliers, which the file names only by identifier); sum of these 1.21742e-5 kg
- propane: 1.49256e-5 kg
- propane, burned in building machine: 2.15206e-6 MJ
- propylene: 1.41037e-6, 7.36363e-5 kg (2 suppliers, which the file names only by identifier); sum of these 7.50466e-5 kg
- propylene glycol, liquid: 2.98512e-8, 1.47423e-8 kg (2 suppliers, which the file names only by identifier); sum of these 4.45935e-8 kg
- purified terephthalic acid: 7.42688e-6 kg
- quicklime, in pieces, loose: 0.000101149 kg
- quicklime, milled, loose: 9.5316e-8, 0.000143712 kg (2 suppliers, which the file names only by identifier); sum of these 0.000143807 kg
- rare earth tailings, from bastnaesite and monazite ore: -0.000143468 kg
- recultivation, iron mine: 9.62959e-8 m2
- refinery sludge: -2.45579e-7, -2.36751e-6, -1.12369e-8 kg (3 suppliers, which the file names only by identifier); sum of these -2.62433e-6 kg
- refractory, basic, packed: 6.17103e-5 kg
- refractory, fireclay, packed: 2.96747e-8 kg
- refrigerator: 1.01375e-9 unit
- reinforcing steel: 0.0717452 kg
- residue from TiO2 production, chloride process: -5.19305e-7 kg
- residue from TiO2 production, sulfate process: -7.49562e-7 kg
- rosin size, for paper production: 3.32653e-9 kg
- rutile, 95% titanium dioxide: 9.46272e-7 kg
- scrap aluminium: -7.97361e-9, -3.74104e-10, -1.67892e-8 kg (3 suppliers, which the file names only by identifier); sum of these -2.51369e-8 kg
- scrap copper: -2.23507e-10, -4.7638e-9, -1.00306e-8 kg (3 suppliers, which the file names only by identifier); sum of these -1.50179e-8 kg
- scrap steel: -1.15213e-10, -2.82411e-7, -9.09363e-8 kg (3 suppliers, which the file names only by identifier); sum of these -3.73462e-7 kg
- sewage sludge: -9.745e-10 m3
- sewage sludge, dried: -8.71392e-8 kg
- silica sand: 2.81843e-5 kg
- silicon carbide: 1.56411e-7 kg
- silicone product: 2.87203e-7 kg
- sludge from pulp and paper production: -1.4837e-8 kg
- soap: 2.41589e-7 kg
- soda ash, light: 1.52824e-5 kg
- sodium borates: 5.57e-7 kg
- sodium chloride, powder: 0.00139316 kg
- sodium hydroxide, without water, in 50% solution state: 0.000274844 kg
- sodium nitrite: 1.1951e-9, 5.88634e-10 kg (2 suppliers, which the file names only by identifier); sum of these 1.78374e-9 kg
- sodium percarbonate, powder: 1.32409e-6, 2.68111e-6 kg (2 suppliers, which the file names only by identifier); sum of these 4.00519e-6 kg
- sodium persulfate: 1.98936e-7 kg
- sodium phosphate: 2.58449e-13, 5.44433e-14 kg (2 suppliers, which the file names only by identifier); sum of these 3.12893e-13 kg
- sodium silicate, solid: 1.68682e-11, 3.41559e-11 kg (2 suppliers, which the file names only by identifier); sum of these 5.10241e-11 kg
- sodium silicate, spray powder, 80%: 2.79212e-7 kg
- sodium sulfate, anhydrite: 3.64399e-7, 5.95193e-8 kg (2 suppliers, which the file names only by identifier); sum of these 4.23919e-7 kg
- sodium tetrahydridoborate: 1.79522e-11 kg
- solvent, organic: 5.54531e-7 kg
- soybean, organic: 0.000102504 kg
- spent solvent mixture: -2.74229e-6, -2.36071e-8, -1.00763e-6 kg (3 suppliers, which the file names only by identifier); sum of these -3.77352e-6 kg
- spodumene: 1.03172e-5 kg
- sponge iron: 0.000418042, 0.00128325 kg (2 suppliers, which the file names only by identifier); sum of these 0.00170129 kg
- steam, in chemical industry: 3.68375e-5, 0.00135512 kg (2 suppliers, which the file names only by identifier); sum of these 0.00139195 kg
- steel, chromium steel 18/8, hot rolled: 3.99274e-8 kg
- steel, low-alloyed: 0.000119936 kg
- steel, low-alloyed, hot rolled: 2.031e-8 kg
- steel, unalloyed: 9.64132e-11 kg
- stone wool factory: 4.28387e-15 unit
- styrene: 1.59641e-11 kg
- sugar beet: 0.0078315 kg
- sugar beet pulp: -0.00159778 kg
- sugar refinery: 1.22908e-13 unit
- sulfidic tailings, from nickel mine operation: -0.000386131, -0.000490179, -8.1191e-5, -0.000336141 kg (4 suppliers, which the file names only by identifier); sum of these -0.00129364 kg
- sulfidic tailings, generic: -0.000577918 kg
- sulfur: 5.93774e-7 kg
- sulfur dioxide, liquid: 3.65774e-7, 9.31049e-7 kg (2 suppliers, which the file names only by identifier); sum of these 1.29682e-6 kg
- sulfuric acid: 0.000681476, 2.87515e-5 kg (2 suppliers, which the file names only by identifier); sum of these 0.000710228 kg
- tap water: 0.01027, 0.0064242, 0.428154, 0.0169795, 0.00140742, 0.0316828, 4.91394, 0.0111383, 0.00346462, 0.0867977 kg (10 suppliers, which the file names only by identifier); sum of these 5.51026 kg
- television: 9.32791e-10 unit
- tetraethyl orthosilicate: 3.95145e-6 kg
- textile, knit cotton: 6.30701e-8 kg
- tin: 6.44632e-11 kg
- tissue paper: 7.46611e-7 kg
- titanium dioxide: 4.30355e-8, 8.6071e-8 kg (2 suppliers, which the file names only by identifier); sum of these 1.29107e-7 kg
- titanium tetrachloride: 8.42757e-8 kg
- transport, freight train: 0.000158988 metric ton*km
- transport, freight, inland waterways, barge: 5.10193e-6 metric ton*km
- transport, freight, lorry 16-32 metric ton, EURO4: 3.51974e-5, 4.10065e-6 metric ton*km (2 suppliers, which the file names only by identifier); sum of these 3.9298e-5 metric ton*km
- transport, freight, lorry >32 metric ton, EURO4: 0.000236757, 2.75833e-5 metric ton*km (2 suppliers, which the file names only by identifier); sum of these 0.000264341 metric ton*km
- transport, freight, lorry, unspecified: 6.09864e-10 metric ton*km
- transport, freight, sea, bulk carrier for dry goods: 0.00064885 metric ton*km
- transport, tractor and trailer, agricultural: 8.20907e-5, 2.00254e-9 metric ton*km (2 suppliers, which the file names only by identifier); sum of these 8.20927e-5 metric ton*km
- urea: 4.3163e-7, 3.68581e-7 kg (2 suppliers, which the file names only by identifier); sum of these 8.0021e-7 kg
- vacuum cleaner: 7.33325e-11 unit
- vinyl acetate: 3.83157e-8 kg
- vinyl chloride: 0.00012103 kg
- washing, drying and finishing laundry: 5.23195e-6 kg
- waste emulsion paint, separated: -2.49203e-9 kg
- waste gypsum: -1.11233e-5, -0.000235308, -0.00256308 kg (3 suppliers, which the file names only by identifier); sum of these -0.00280952 kg
- waste mineral oil: -7.62351e-8, -9.76675e-6, -3.08697e-6 kg (3 suppliers, which the file names only by identifier); sum of these -1.293e-5 kg
- waste paint: -3.7324e-9 kg
- waste paint on metal: -1.5197e-8, -1.28997e-10 kg (2 suppliers, which the file names only by identifier); sum of these -1.5326e-8 kg
- waste paperboard: -1.95805e-9, -1.27707e-9, -2.38198e-7, -1.28225e-8, -1.42776e-8, -6.89897e-10, -3.86735e-9, -8.11638e-6, -1.71214e-10, -1.08174e-9 kg (10 suppliers, which the file names only by identifier); sum of these -8.39072e-6 kg
- waste plastic, mixture: -1.18125e-7, -5.96911e-10, -1.31699e-9, -7.69359e-6, -7.89269e-9, -3.09564e-9, -3.25996e-9 kg (7 suppliers, which the file names only by identifier); sum of these -7.82788e-6 kg
- waste polyethylene: -9.80196e-9, -6.20516e-10, -1.90852e-11, -5.09826e-9, -4.86599e-11, -3.68007e-12, -2.00983e-11, -8.11947e-12 kg (8 suppliers, which the file names only by identifier); sum of these -1.56204e-8 kg
- waste polyethylene terephthalate, for recycling, sorted: 2.21968e-6, 6.52199e-7, 7.39892e-6 kg (3 suppliers, which the file names only by identifier); sum of these 1.02708e-5 kg
- waste polystyrene: -3.41598e-10, -9.12517e-8, -1.45327e-10, -1.30349e-8, -3.59731e-10, -6.5868e-11, -8.70943e-10, -1.12971e-8 kg (8 suppliers, which the file names only by identifier); sum of these -1.17367e-7 kg
- waste polyvinylchloride: -3.72296e-12, -1.93077e-11, -8.21412e-12, -2.03326e-11, -4.92271e-11, -7.36754e-10, -6.38532e-10, -5.15769e-9 kg (8 suppliers, which the file names only by identifier); sum of these -6.63378e-9 kg
- waste preparation facility: 1.69067e-14 unit
- waste textile, soiled: -6.30701e-8 kg
- waste x-ray film: -2.82222e-7 kg
- waste yarn and waste textile: -1.51679e-6 kg
- wastewater from maize starch production: -5.05177e-13 m3
- wastewater from pig iron production: -4.73691e-6 m3
- wastewater, average: -1.06173e-6, -1.99751e-5, -0.00654961, -2.93538e-5 m3 (4 suppliers, which the file names only by identifier); sum of these -0.0066 m3
- wastewater, unpolluted: -1.04018e-5 m3
- water, completely softened: 6.96307e-9 kg
- water, decarbonised: 0.00674492, 0.00089878, 5.05855e-5, 1.59331e-7, 0.000223541, 4.41244e-5, 0.000166335, 0.00572868, 0.00362499, 0.000304806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 kg (13 suppliers, which the file names only by identifier); sum of these 0.0186031 kg
- water, deionised: 8.38718e-5, 0.0232993, 0.602584 kg (3 suppliers, which the file names only by identifier); sum of these 0.625967 kg
- water, harvested from rainwater: 9.62357e-6 kg
- wax, lost-wax casting: 2.23614e-6 kg
- wire drawing, steel: 8.1152e-12 kg
- wood ash mixture, pure: -1.45273e-8, -7.06705e-7, -3.58516e-6 kg (3 suppliers, which the file names only by identifier); sum of these -4.30639e-6 kg
- wood chips, dry, measured as dry mass: 6.86103e-9 kg
- xylene: 0.000171601 kg
- yarn, cotton: 6.62732e-6 kg
- zircon: 1.33356e-6 kg

## Inputs from nature
- Aluminium [natural resource, in ground]: 3.44809e-5 kg
- Arsenic [natural resource, in ground]: 8.43243e-8 kg
- Boron [natural resource, in ground]: 9.41696e-5 kg
- Calcium [natural resource, in ground]: 5.31243e-6 kg
- Carbon dioxide, in air [natural resource, in air]: 0.000765568 kg
- Cerium [natural resource, in ground]: 6.70109e-6 kg
- Chromium [natural resource, in ground]: 1.1675e-5 kg
- Clay, unspecified [natural resource, in ground]: 2.21757 kg
- Cobalt [natural resource, in ground]: 3.91137e-6 kg
- Copper [natural resource, in ground]: 8.25938e-5 kg
- Europium [natural resource, in ground]: 2.68044e-8 kg
- Gadolinium [natural resource, in ground]: 9.38153e-8 kg
- Gangue [natural resource, in ground]: 0.0423647 kg
- Gold [natural resource, in ground]: 2.52987e-12 kg
- Iron [natural resource, in ground]: 0.00163112 kg
- Lanthanum [natural resource, in ground]: 3.0825e-6 kg
- Lead [natural resource, in ground]: 8.43243e-8 kg
- Magnesium [natural resource, in ground]: 5.4405e-5 kg
- Manganese [natural resource, in ground]: 6.3013e-6 kg
- Neodymium [natural resource, in ground]: 2.4794e-6 kg
- Nickel [natural resource, in ground]: 5.57894e-5 kg
- Niobium [natural resource, in ground]: 1.51452e-7 kg
- Occupation, construction site [natural resource, land]: 3.52706e-10 m2*year
- Occupation, industrial area [natural resource, land]: 5.06544e-6 m2*year
- Occupation, mineral extraction site [natural resource, land]: 0.000275862 m2*year
- Oxygen [natural resource, in air]: 0.000434667 kg
- Praseodymium [natural resource, in ground]: 8.30936e-7 kg
- Samarium [natural resource, in ground]: 1.07217e-7 kg
- Scandium [natural resource, in ground]: 1.23792e-8 kg
- Silicon [natural resource, in ground]: 0.000212261 kg
- Silver [natural resource, in ground]: 4.55377e-11 kg
- Sodium chloride [natural resource, in ground]: 0.00025545 kg
- Strontium [natural resource, in ground]: 0.000287272 kg
- Sulfur [natural resource, in ground]: 0.000714705 kg
- Transformation, from forest, unspecified [natural resource, land]: 8.85831e-8 m2
- Transformation, from unspecified [natural resource, land]: 2.42811e-6 m2
- Transformation, from unspecified, natural (non-use) [natural resource, land]: 0.000139311 m2
- Transformation, to industrial area [natural resource, land]: 0.000139437 m2
- Transformation, to mineral extraction site [natural resource, land]: 2.39045e-6 m2
- Water, cooling, unspecified natural origin [natural resource, in water]: 2.81593e-5 m3
- Water, lake [natural resource, in water]: 7.794e-7 m3
- Water, river [natural resource, in water]: 1.42707e-6 m3
- Water, salt, ocean [natural resource, in water]: 7.24925e-9 m3
- Water, unspecified natural origin [natural resource, in ground]: 0.000348534 m3
- Water, unspecified natural origin [natural resource, in water]: 0.0002396 m3
- Water, well, in ground [natural resource, in water]: 0.000118491 m3
- Zinc [natural resource, in ground]: 1.68649e-7 kg

## Emissions to nature
- Acetaldehyde [air, unspecified]: 1.09896e-10 kg
- Acetaldehyde [air, urban air close to ground]: 4.96566e-10 kg
- Acetic acid [air, unspecified]: 5.72899e-9 kg
- Acetone [air, non-urban air or from high stacks]: 1.61279e-8 kg
- Acetone [air, unspecified]: 1.88086e-14 kg
- Acrolein [air, non-urban air or from high stacks]: 1.99025e-11 kg
- Aluminium III [air, non-urban air or from high stacks]: 3.09785e-7 kg
- Ammonia [air, non-urban air or from high stacks]: 2.33721e-9 kg
- Ammonia [air, unspecified]: 2.27324e-8 kg
- Ammonia [air, urban air close to ground]: 1.41646e-8 kg
- Antimony ion [air, non-urban air or from high stacks]: 2.74136e-13 kg
- Antimony ion [air, unspecified]: 1.00401e-12 kg
- Argon-40 [air, unspecified]: 3.71708e-8 kg
- Arsenic ion [air, non-urban air or from high stacks]: 2.71435e-10 kg
- Arsenic ion [air, unspecified]: 1.43612e-9 kg
- Arsenic ion [air, urban air close to ground]: 8.14057e-12 kg
- Barium II [air, non-urban air or from high stacks]: 8.54053e-12 kg
- Benzene [air, non-urban air or from high stacks]: 4.11775e-7 kg
- Benzene [air, unspecified]: 8.88967e-9 kg
- Benzene [air, urban air close to ground]: 7.15305e-9 kg
- Benzene, ethyl- [air, unspecified]: 2.7993e-15 kg
- Benzene, ethyl- [air, urban air close to ground]: 2.35809e-10 kg
- Benzene, hexachloro- [air, unspecified]: 5.54029e-11 kg
- Benzene, hexachloro- [air, urban air close to ground]: 5.65955e-17 kg
- Benzo(a)pyrene [air, non-urban air or from high stacks]: 2.97775e-9 kg
- Benzo(a)pyrene [air, unspecified]: 5.01466e-16 kg
- Benzo(a)pyrene [air, urban air close to ground]: 3.93015e-12 kg
- Beryllium II [air, non-urban air or from high stacks]: 1.36877e-13 kg
- Bromine [air, unspecified]: 6.80492e-15 kg
- Bromine [air, urban air close to ground]: 4.88439e-10 kg
- Butane [air, unspecified]: 2.57505e-11 kg
- Cadmium II [air, non-urban air or from high stacks]: 1.13238e-13 kg
- Cadmium II [air, unspecified]: 3.62952e-10 kg
- Cadmium II [air, urban air close to ground]: 8.60128e-12 kg
- Calcium [air, non-urban air or from high stacks]: 2.16849e-7 kg
- Calcium [air, unspecified]: 2.56048e-10 kg
- Calcium [air, urban air close to ground]: 4.76236e-8 kg
- Carbon dioxide, fossil [air, non-urban air or from high stacks]: 0.00109109 kg
- Carbon dioxide, fossil [air, unspecified]: 0.003962 kg
- Carbon dioxide, fossil [air, urban air close to ground]: 1.35259e-5 kg
- Carbon dioxide, non-fossil [air, unspecified]: 9.98417e-9 kg
- Carbon dioxide, non-fossil [air, urban air close to ground]: 0.00185815 kg
- Carbon disulfide [air, non-urban air or from high stacks]: 3.5611e-10 kg
- Carbon monoxide, fossil [air, non-urban air or from high stacks]: 5.18372e-5 kg
- Carbon monoxide, fossil [air, unspecified]: 0.000343891 kg
- Carbon monoxide, fossil [air, urban air close to ground]: 9.82623e-8 kg
- Carbon monoxide, non-fossil [air, unspecified]: 2.7993e-11 kg
- Carbon monoxide, non-fossil [air, urban air close to ground]: 5.50244e-8 kg
- Carbonyl sulfide [air, unspecified]: 1.99861e-9 kg
- Chlorine [air, unspecified]: 1.68505e-10 kg
- Chlorine [air, urban air close to ground]: 1.46532e-9 kg
- Chloroethylene [air, unspecified]: 7.66071e-9 kg
- Chloroform [air, unspecified]: 1.79994e-10 kg
- Chromium III [air, non-urban air or from high stacks]: 3.90874e-7 kg
- Chromium III [air, unspecified]: 3.80166e-7 kg
- Chromium III [air, urban air close to ground]: 3.93315e-11 kg
- Chromium VI [air, non-urban air or from high stacks]: 9.77121e-9 kg
- Chromium VI [air, unspecified]: 5.92891e-13 kg
- Chromium VI [air, urban air close to ground]: 3.25618e-13 kg
- Cobalt II [air, non-urban air or from high stacks]: 3.04436e-9 kg
- Cobalt II [air, unspecified]: 1.04138e-9 kg
- Copper ion [air, non-urban air or from high stacks]: 6.26295e-8 kg
- Copper ion [air, unspecified]: 2.48844e-8 kg
- Copper ion [air, urban air close to ground]: 1.89092e-10 kg
- Cyanide [air, non-urban air or from high stacks]: 4.6705e-9 kg
- Dinitrogen monoxide [air, non-urban air or from high stacks]: 5.41971e-9 kg
- Dinitrogen monoxide [air, unspecified]: 4.36416e-9 kg
- Dinitrogen monoxide [air, urban air close to ground]: 1.87235e-8 kg
- Dioxins, measured as 2,3,7,8-tetrachlorodibenzo-p-dioxin [air, non-urban air or from high stacks]: 2.64735e-16 kg
- Dioxins, measured as 2,3,7,8-tetrachlorodibenzo-p-dioxin [air, unspecified]: 1.016e-13 kg
- Dioxins, measured as 2,3,7,8-tetrachlorodibenzo-p-dioxin [air, urban air close to ground]: 2.56566e-16 kg
- Ethane [air, non-urban air or from high stacks]: 1.09044e-7 kg
- Ethane, 1,1-difluoro-, HFC-152a [air, urban air close to ground]: 2.75557e-9 kg
- Ethane, 1,2-dichloro- [air, unspecified]: 5.69676e-9 kg
- Ethanol [air, non-urban air or from high stacks]: 1.62804e-11 kg
- Ethanol [air, unspecified]: 3.76172e-14 kg
- Ethylene [air, unspecified]: 8.76928e-8 kg
- Fluorine [air, unspecified]: 8.70317e-10 kg
- Fluorine [air, urban air close to ground]: 4.07029e-10 kg
- Formaldehyde [air, unspecified]: 4.45501e-9 kg
- Formaldehyde [air, urban air close to ground]: 1.02186e-9 kg
- Heat, waste [air, non-urban air or from high stacks]: 1.43236e-6 MJ
- Heat, waste [air, unspecified]: 1.07838e-5 MJ
- Hexane [air, urban air close to ground]: 1.52246e-6 kg
- Hydrocarbons, aliphatic, alkanes, unspecified [air, unspecified]: 1.74415e-6 kg
- Hydrocarbons, aliphatic, alkanes, unspecified [air, urban air close to ground]: 7.15305e-9 kg
- Hydrocarbons, aliphatic, unsaturated [air, unspecified]: 3.56647e-13 kg
- Hydrocarbons, aliphatic, unsaturated [air, urban air close to ground]: 2.43665e-8 kg
- Hydrocarbons, aromatic [air, unspecified]: 3.18727e-7 kg
- Hydrochloric acid [air, unspecified]: 5.00375e-7 kg
- Hydrochloric acid [air, urban air close to ground]: 1.36431e-10 kg
- Hydrogen [air, unspecified]: 2.28886e-5 kg
- Hydrogen fluoride [air, unspecified]: 3.49415e-8 kg
- Hydrogen sulfide [air, unspecified]: 8.68845e-8 kg
- Iron ion [air, unspecified]: 2.16853e-9 kg
- Lead II [air, non-urban air or from high stacks]: 4.03305e-11 kg
- Lead II [air, unspecified]: 5.66204e-8 kg
- Lead II [air, urban air close to ground]: 3.20426e-10 kg
- Magnesium [air, non-urban air or from high stacks]: 1.85871e-7 kg
- Magnesium [air, unspecified]: 5.15864e-13 kg
- Magnesium [air, urban air close to ground]: 2.93878e-9 kg
- Manganese II [air, non-urban air or from high stacks]: 6.29101e-12 kg
- Manganese II [air, unspecified]: 3.11043e-9 kg
- Manganese II [air, urban air close to ground]: 1.39203e-9 kg
- Mercury II [air, non-urban air or from high stacks]: 1.37258e-13 kg
- Mercury II [air, unspecified]: 7.12322e-9 kg
- Mercury II [air, urban air close to ground]: 2.14715e-11 kg
- Methane, bromo-, Halon 1001 [air, unspecified]: 7.85259e-9 kg
- Methane, chlorodifluoro-, HCFC-22 [air, non-urban air or from high stacks]: 1.24676e-9 kg
- Methane, fossil [air, non-urban air or from high stacks]: 1.00802e-6 kg
- Methane, fossil [air, unspecified]: 5.53308e-8 kg
- Methane, fossil [air, urban air close to ground]: 4.86956e-9 kg
- Methane, non-fossil [air, unspecified]: 2.7993e-13 kg
- Methane, non-fossil [air, urban air close to ground]: 3.41149e-9 kg
- Methane, tetrachloro-, R-10 [air, unspecified]: 9.5611e-11 kg
- Methanol [air, non-urban air or from high stacks]: 1.62804e-9 kg
- Methanol [air, unspecified]: 2.31439e-9 kg
- Methyl acetate [air, unspecified]: 4.20736e-9 kg
- Methyl formate [air, unspecified]: 3.27386e-11 kg
- Molybdenum VI [air, unspecified]: 1.60628e-15 kg
- Monochloroethane [air, unspecified]: 1.50315e-10 kg
- NMVOC, non-methane volatile organic compounds [air, non-urban air or from high stacks]: 4.44032e-6 kg
- NMVOC, non-methane volatile organic compounds [air, unspecified]: 2.92221e-6 kg
- NMVOC, non-methane volatile organic compounds [air, urban air close to ground]: 9.66456e-9 kg
- Nickel II [air, non-urban air or from high stacks]: 7.67095e-8 kg
- Nickel II [air, unspecified]: 1.72258e-8 kg
- Nickel II [air, urban air close to ground]: 4.9489e-11 kg
- Nitrogen [air, unspecified]: 1.34633e-5 kg
- Nitrogen oxides [air, non-urban air or from high stacks]: 2.41041e-6 kg
- Nitrogen oxides [air, unspecified]: 8.07671e-6 kg
- Nitrogen oxides [air, urban air close to ground]: 7.35404e-7 kg
- PAH, polycyclic aromatic hydrocarbons [air, non-urban air or from high stacks]: 8.73116e-10 kg
- PAH, polycyclic aromatic hydrocarbons [air, unspecified]: 6.22612e-9 kg
- PAH, polycyclic aromatic hydrocarbons [air, urban air close to ground]: 1.13881e-10 kg
- Palladium II [air, unspecified]: 1.67351e-13 kg
- Particulate Matter, < 2.5 um [air, non-urban air or from high stacks]: 3.76576e-6 kg
- Particulate Matter, < 2.5 um [air, unspecified]: 3.32173e-6 kg
- Particulate Matter, < 2.5 um [air, urban air close to ground]: 3.55238e-7 kg
- Particulate Matter, > 10 um [air, non-urban air or from high stacks]: 3.66551e-6 kg
- Particulate Matter, > 10 um [air, unspecified]: 6.60235e-7 kg
- Particulate Matter, > 10 um [air, urban air close to ground]: 1.0281e-5 kg
- Particulate Matter, > 2.5 um and < 10um [air, non-urban air or from high stacks]: 2.99672e-6 kg
- Particulate Matter, > 2.5 um and < 10um [air, unspecified]: 1.06549e-6 kg
- Particulate Matter, > 2.5 um and < 10um [air, urban air close to ground]: 1.72662e-9 kg
- Pentane [air, unspecified]: 4.29899e-11 kg
- Phenol [air, unspecified]: 2.51424e-9 kg
- Phenol, pentachloro- [air, non-urban air or from high stacks]: 1.31158e-9 kg
- Phenol, pentachloro- [air, unspecified]: 7.55812e-19 kg
- Phenol, pentachloro- [air, urban air close to ground]: 6.36702e-14 kg
- Phosphorus [air, non-urban air or from high stacks]: 1.75386e-11 kg
- Phosphorus [air, urban air close to ground]: 2.44208e-9 kg
- Platinum [air, non-urban air or from high stacks]: 2.54225e-12 kg
- Polychlorinated biphenyls [air, unspecified]: 1.43482e-10 kg
- Polychlorinated biphenyls [air, urban air close to ground]: 1.77393e-13 kg
- Potassium I [air, unspecified]: 2.34379e-12 kg
- Potassium I [air, urban air close to ground]: 1.9049e-7 kg
- Propane [air, non-urban air or from high stacks]: 1.09044e-9 kg
- Propane [air, unspecified]: 7.24389e-12 kg
- Propanol [air, urban air close to ground]: 9.59431e-7 kg
- Propene [air, unspecified]: 4.3323e-9 kg
- Propionic acid [air, unspecified]: 7.0426e-13 kg
- Radium-226 [air, non-urban air or from high stacks]: 2.79212e-6 kBq
- Selenium IV [air, non-urban air or from high stacks]: 2.50497e-12 kg
- Selenium IV [air, unspecified]: 1.36851e-10 kg
- Silver I [air, non-urban air or from high stacks]: 2.66506e-11 kg
- Silver I [air, unspecified]: 1.54026e-13 kg
- Sodium [air, unspecified]: 2.95768e-13 kg
- Sodium [air, urban air close to ground]: 1.05829e-8 kg
- Styrene [air, non-urban air or from high stacks]: 1.66998e-11 kg
- Sulfur dioxide [air, non-urban air or from high stacks]: 2.19052e-6 kg
- Sulfur dioxide [air, unspecified]: 2.14664e-5 kg
- Sulfur dioxide [air, urban air close to ground]: 2.08317e-8 kg
- Sulfur hexafluoride [air, unspecified]: 1.41215e-13 kg
- Sulfur oxides [air, unspecified]: 1.27241e-10 kg
- Sulfur trioxide [air, unspecified]: 2.54092e-7 kg
- Sulfuric acid [air, unspecified]: 3.83979e-9 kg
- Sulfuric acid [air, urban air close to ground]: 5.94996e-11 kg
- Tellurium [air, unspecified]: 1.34416e-12 kg
- Thallium I [air, non-urban air or from high stacks]: 5.79536e-13 kg
- Thorium-232 [air, non-urban air or from high stacks]: 1.41281e-5 kBq
- Tin ion [air, non-urban air or from high stacks]: 1.16916e-10 kg
- Tin ion [air, unspecified]: 6.59254e-11 kg
- Titanium ion [air, unspecified]: 2.04158e-10 kg
- Toluene [air, non-urban air or from high stacks]: 1.29252e-9 kg
- Toluene [air, unspecified]: 3.07385e-9 kg
- Toluene [air, urban air close to ground]: 2.35809e-9 kg
- Trichloroethylene [air, unspecified]: 5.97439e-11 kg
- Uranium-238 [air, non-urban air or from high stacks]: 3.74145e-8 kBq
- VOC, volatile organic compounds [air, unspecified]: 1.10005e-8 kg
- Vanadium V [air, non-urban air or from high stacks]: 3.81722e-10 kg
- Vanadium V [air, unspecified]: 1.47623e-10 kg
- Water [air, non-urban air or from high stacks]: 9.36888e-9 m3
- Water [air, unspecified]: 0.000950389 m3
- Water [air, urban air close to ground]: 5.19966e-7 m3
- Xylene [air, unspecified]: 9.47035e-9 kg
- Zinc II [air, non-urban air or from high stacks]: 1.69318e-9 kg
- Zinc II [air, unspecified]: 7.70926e-8 kg
- Zinc II [air, urban air close to ground]: 4.17376e-9 kg
- m-Xylene [air, unspecified]: 1.11972e-14 kg
- m-Xylene [air, urban air close to ground]: 9.43259e-10 kg
- Sulfur [soil, industrial]: 1.68232e-8 kg
- AOX, Adsorbable Organic Halogen [water, unspecified]: 2.57706e-10 kg
- Aluminium III [water, surface water]: 1.91802e-9 kg
- Aluminium III [water, unspecified]: 8.92586e-11 kg
- Ammonium [water, ground-]: 0.00021179 kg
- Ammonium [water, surface water]: 0.0021802 kg
- Ammonium [water, unspecified]: 4.49304e-8 kg
- Antimony ion [water, surface water]: 1.91802e-9 kg
- Antimony ion [water, unspecified]: 6.23697e-12 kg
- Arsenic ion [water, ocean]: 1.30089e-11 kg
- Arsenic ion [water, surface water]: 3.19981e-9 kg
- Arsenic ion [water, unspecified]: 1.20618e-10 kg
- BOD5, Biological Oxygen Demand [water, surface water]: 2.17056e-8 kg
- BOD5, Biological Oxygen Demand [water, unspecified]: 8.15822e-7 kg
- Benzene, hexachloro- [water, unspecified]: 7.75749e-15 kg
- Benzene, pentachloro- [water, unspecified]: 1.27294e-14 kg
- Boron [water, surface water]: 2.10982e-7 kg
- COD, Chemical Oxygen Demand [water, surface water]: 4.90734e-7 kg
- COD, Chemical Oxygen Demand [water, unspecified]: 2.47899e-6 kg
- Cadmium II [water, ocean]: 1.55665e-12 kg
- Cadmium II [water, surface water]: 1.92292e-10 kg
- Cadmium II [water, unspecified]: 1.21809e-10 kg
- Calcium II [water, surface water]: 3.1967e-5 kg
- Chloride [water, surface water]: 0.000160376 kg
- Chloride [water, unspecified]: 9.40936e-6 kg
- Chlorides, unspecified [water, unspecified]: 1.37143e-7 kg
- Chloroethylene [water, unspecified]: 3.7649e-11 kg
- Chloroform [water, unspecified]: 9.98153e-13 kg
- Chromium III [water, surface water]: 1.91896e-9 kg
- Chromium III [water, unspecified]: 6.55389e-10 kg
- Chromium VI [water, unspecified]: 8.44698e-10 kg
- Cobalt II [water, ocean]: 1.68027e-10 kg
- Cobalt II [water, surface water]: 1.31616e-9 kg
- Cobalt II [water, unspecified]: 4.55542e-10 kg
- Copper ion [water, ocean]: 3.57115e-11 kg
- Copper ion [water, surface water]: 2.42522e-9 kg
- Copper ion [water, unspecified]: 1.27892e-9 kg
- Cyanide [water, surface water]: 1.23772e-12 kg
- Cyanide [water, unspecified]: 1.20264e-9 kg
- DOC, Dissolved Organic Carbon [water, surface water]: 7.90448e-7 kg
- DOC, Dissolved Organic Carbon [water, unspecified]: 2.49149e-7 kg
- Dioxins, measured as 2,3,7,8-tetrachlorodibenzo-p-dioxin [water, unspecified]: 2.77371e-18 kg
- Dissolved solids [water, surface water]: 1.46568e-9 kg
- Ethane, 1,2-dichloro- [water, unspecified]: 8.36178e-12 kg
- Fluoride [water, surface water]: 9.5901e-8 kg
- Fluoride [water, unspecified]: 3.95595e-11 kg
- Hydrochloric acid [water, unspecified]: 1.33798e-8 kg
- Hydrogen sulfide [water, surface water]: 1.17563e-9 kg
- Iron ion [water, ocean]: 8.08424e-9 kg
- Iron ion [water, surface water]: 1.91802e-9 kg
- Iron ion [water, unspecified]: 3.79537e-8 kg
- Lead II [water, surface water]: 3.24338e-10 kg
- Lead II [water, unspecified]: 8.86699e-10 kg
- Lead-210 [water, surface water]: 3.0049e-5 kBq
- Magnesium [water, surface water]: 6.3934e-6 kg
- Manganese II [water, surface water]: 3.1967e-9 kg
- Mercury II [water, ocean]: 1.61449e-13 kg
- Mercury II [water, surface water]: 1.91802e-10 kg
- Mercury II [water, unspecified]: 1.2921e-11 kg
- Methane, tetrachloro-, R-10 [water, unspecified]: 6.11592e-13 kg
- Molybdenum VI [water, surface water]: 1.91802e-9 kg
- Nickel II [water, ocean]: 2.34125e-10 kg
- Nickel II [water, surface water]: 2.51584e-9 kg
- Nickel II [water, unspecified]: 1.26031e-9 kg
- Nitrate [water, surface water]: 3.1967e-6 kg
- Nitrate [water, unspecified]: 1.07124e-10 kg
- Nitrogen [water, ocean]: 9.0544e-8 kg
- Nitrogen [water, unspecified]: 1.02749e-7 kg
- Nitrogen, organic bound [water, unspecified]: 1.09079e-8 kg
- Oils, unspecified [water, unspecified]: 1.20264e-8 kg
- PAH, polycyclic aromatic hydrocarbons [water, surface water]: 1.47012e-11 kg
- Phosphate [water, surface water]: 1.27868e-9 kg
- Phosphorus [water, unspecified]: 2.60166e-8 kg
- Polonium-210 [water, surface water]: 3.0049e-5 kBq
- Potassium I [water, surface water]: 3.1967e-8 kg
- Potassium-40 [water, surface water]: 3.77211e-5 kBq
- Radium-226 [water, surface water]: 1.85409e-5 kBq
- Radium-226 [water, unspecified]: 1.07497e-7 kBq
- Selenium IV [water, surface water]: 3.1967e-10 kg
- Sodium I [water, surface water]: 1.94645e-6 kg
- Sodium I [water, unspecified]: 5.3225e-6 kg
- Solids, inorganic [water, surface water]: 3.06163e-7 kg
- Sulfate [water, surface water]: 6.3934e-6 kg
- Sulfate [water, unspecified]: 0.00515825 kg
- Sulfite [water, surface water]: 6.3934e-8 kg
- Sulfuric acid [water, surface water]: 1.10226e-8 kg
- Suspended solids, unspecified [water, surface water]: 7.02177e-8 kg
- Suspended solids, unspecified [water, unspecified]: 9.33272e-7 kg
- TOC, Total Organic Carbon [water, surface water]: 7.90448e-7 kg
- TOC, Total Organic Carbon [water, unspecified]: 2.49149e-7 kg
- Thorium-232 [water, surface water]: 7.03274e-6 kBq
- Thorium-232 [water, unspecified]: 5.44464e-7 kBq
- Tin ion [water, surface water]: 1.91802e-9 kg
- Titanium ion [water, unspecified]: 3.20952e-9 kg
- Uranium-238 [water, surface water]: 1.47048e-5 kBq
- Uranium-238 [water, unspecified]: 1.44074e-9 kBq
- Vanadium V [water, surface water]: 1.91802e-9 kg
- Water [water, surface water]: 1.12915e-6 m3
- Water [water, unspecified]: 2.7901e-5 m3
- Zinc II [water, ocean]: 1.15424e-11 kg
- Zinc II [water, surface water]: 3.23882e-9 kg
- Zinc II [water, unspecified]: 3.1977e-9 kg
