# treatment of sewage sludge, 75% water, WWT, heat carrier liquid, 40% C3H8O2, sanitary landfill

Dataset: EcoSpold 2, unit process
Geography: GLO
Time period: 1994-01-01 to 2022-12-31
Technology level: current
Classification: ISIC rev.4 ecoinvent: 3821:Treatment and disposal of non-hazardous waste
Scenario: Business-as-Usual
System model: Allocation at the point of substitution
Generated by: Nikolia Stoikou
Database: ecoinvent
isCopyrightProtected: true

## General comment
The process represents the treatment of a waste (sewage sludge) that is exclusively generated from another waste treatment. Sewage sludge is generated in the wastewater treatment of 'heat carrier liquid, 40% C3H8O2'. Recommended use of this dataset: to be used within the specific chain of treatments for 'heat carrier liquid, 40% C3H8O2'. Share of biogenic carbon in the sludge: 0%. Landfill gas capture and utilisation generates 0.03321 kWh of electricity and 0.0599 MJ of useful heat. 0.002598 kg waste mass remains in the landfill even after the long term period.

## Included activities start
The activity starts with the waste being available at the gate of the treatment facility. Collection and transportation of the waste to the treatment plant is not included.

## Included activities end
The activity ends with the waste being treated and waste-specific emissions from the landfill are released to the environment (air due to landfil gas and water due to landfil leachate).

## Geography
Landfill site with mean annual temperature (MAT) of 16.743579766537 degC, mean annual precipitation (MAP) of 1250.84108527132 mm/year, and net infiltration of 790.252035689178 mm/year.The leachate percolating through the landfill has an average residence time of 6.33 years.
References: UN data, 2020. Precipitation, Environment Statistics Database, United Nations Statistics Division Available at: http://data.un.org/Data.aspx?q=precipitation&d=ENV&f=variableID%3a6;
World Bank, 2022. Surface area (sq.km), World Bank Group Available at: https://data.worldbank.org/indicator/AG.SRF.TOTL.K2;
Doka G.,2021. A model for composition-specific life cycle inventories of regionalised wastewater fates, Zurich, Switzerland. http://www.doka.ch/publications.htm

## Technology
Sanitary (controlled) landfill for municipal solid waste. Ultimate average landfill height is 20 meters. Operation phase duration is 30 years. The total raw landfill gas mass produced in the landfill from this waste is 0.1453 kg. The total CH4 mass in the raw landfill gas is 0.08233 kg. Percentage of landfill gas directly emitted is 47w%. Percentage of landfill gas captured and flared is 18.02w%. Percentage of landfill gas captured and utilised is 34.98%. Conversion efficiencies are 27.8e% for electricity and 13.5e% for useful heat. Leachate generated during the first 100 years is collected and treated region-specifically before emission. Based on average waste composition and climate data the end of carbonate phase is estimated to be reached 2'863 years after waste deposition.

## Reference product
- heat, district or industrial, other than natural gas: 1 MJ; By-product classification allocatable product; CPC 17300: Steam and hot water; lognormal variance with pedigree 0.1125, pedigree (1,1,1,1,1)
  Net production of heat from landfill gas utilisation.
  Uncertainty: Uncertainty calculated depending on waste input and uncertainty of transfer coefficients in landfill to landfill gas, uncertainty in gas capture and utilisation.
  production volume 26.5806 MJ
    Calculated from the production volume of the reference product in proportion to the respective output amounts.
  property corresponding fuel use, propane, furnace >100kW 0 MJ; name fuel_use
    Lower heating value of the fuel input related to the heat/electricity output, taken directly from ecoinvent v3.0 dataset "heat production, natural gas, at industrial furnace >100kW, GLO 2000".
  property price 0.0106 EUR2005
    Average European district heat price from Ecoheatcool and Euroheat 2005-2006, Ecoheat Work package 1: The European heat market. Final report. 10.6 EUR/GJ i s the price of district heat. http://www.solarthermalworld.org/files/Ecoheatcool%20WP1%20Web.pdf?download
  properties: carbon allocation 0 kg, carbon content 0, carbon content, fossil 0, carbon content, non-fossil 0, dry mass 1 kg, heating value, net 1 MJ, water content 0, water in wet mass 0 kg, wet mass 1 kg

## Inputs from technosphere
- activated bentonite: 1.80561e-5 kg
- aluminium, wrought alloy: 7.6955e-6 kg
- ammonia, anhydrous, liquid: 7.12327e-8, 7.46596e-9, 7.2706e-8, 2.74387e-7, 3.66951e-8, 3.33756e-8, 7.89569e-7, 2.35869e-8 kg (8 suppliers, which the file names only by identifier); sum of these 1.30902e-6 kg
- anti-reflex-coating, etching, solar glass: 1.08063e-7 m2
- brazing solder, cadmium free: 9.34669e-9 kg
- building, hall, steel construction: 3.218e-9 m2
- building, multi-storey: 1.92717e-8 m3
- cement, unspecified: 6.14484e-5, 2.30551e-7, 1.50802e-7, 6.1018e-6, 1.60669e-6, 1.91529e-7, 7.58753e-8, 9.79119e-7, 3.69675e-6 kg (9 suppliers, which the file names only by identifier); sum of these 7.44815e-5 kg
- chemical, organic: 1.04987e-9 kg
- copper, cathode: 1.48331e-5 kg
- corrugated board box: 1.0873e-7, 2.52374e-7, 4.05021e-9 kg (3 suppliers, which the file names only by identifier); sum of these 3.65155e-7 kg
- diesel, burned in building machine: 0.0399492 MJ
- drawing of pipe, steel: 5.80338e-6 kg
- electricity, low voltage: 4.11695e-7, 8.15884e-7, 7.83743e-6, 1.39808e-7, 2.80107e-6, 2.54247e-8, 1.94159e-6, 5.7175e-7 kWh (8 suppliers, which the file names only by identifier); sum of these 1.45447e-5 kWh
- electricity, medium voltage: 8.63761e-9, 8.25688e-10, 1.49837e-7, 7.62849e-7, 3.89684e-10, 2.38034e-7, 7.08863e-9, 3.61691e-8, 3.14155e-7, 4.65914e-10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 kWh (23 suppliers, which the file names only by identifier); sum of these 4.01508e-6 kWh
- electronics scrap from control units: -1.09085e-6 kg
- electronics, for control units: 1.09085e-6 kg
- ethylene glycol: 0.000232943 kg
- evacuated tube collector: 8.36227e-7 m2
- expansion vessel, 25l: 1.21065e-7 unit
- expansion vessel, 80l: 4.24405e-8 unit
- flat plate solar collector, Cu absorber: 2.85613e-6 m2
- glass tube, borosilicate: 1.31931e-6 kg
- hazardous waste, for incineration: -2.08286e-8, -2.61822e-10 kg (2 suppliers, which the file names only by identifier); sum of these -2.10904e-8 kg
- heat carrier liquid, 40% C3H8O2: -6.9306e-13, -7.13799e-7 m3 (2 suppliers, which the file names only by identifier); sum of these -7.138e-7 m3
- heat storage, 2000l: 1.30904e-7 unit
- heat, central or small-scale, other than natural gas: 0.00010115, 1.38931e-6 MJ (2 suppliers, which the file names only by identifier); sum of these 0.00010254 MJ
- heat, district or industrial, natural gas: 4.37284e-6, 1.31978e-5, 2.16873e-7, 4.1935e-10 MJ (4 suppliers, which the file names only by identifier); sum of these 1.77879e-5 MJ
- hot water tank, 600l: 1.4736e-8 unit
- hydrochloric acid, without water, in 30% solution state: 1.04987e-8 kg
- inert waste, for final disposal: -0.00564254 kg
- injection moulding: 7.27233e-7 kg
- municipal solid waste: -3.86064e-12, -9.85823e-13, -3.08205e-12, -4.6518e-13, -3.46962e-12, -2.15808e-12, -4.53034e-12, -2.59114e-13, -3.93516e-13, -2.00005e-12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 kg (39 suppliers, which the file names only by identifier); sum of these -2.63862e-9 kg
- polyethylene, high density, granulate: 7.27233e-7 kg
- polyethylene, low density, granulate: 0.000406263 kg
- propylene glycol, liquid: 1.25616e-5 kg
- pump, 40W: 5.80387e-7 unit
- reinforcing steel: 0.000133024 kg
- selective coat, copper sheet, black chrome: 1.51541e-8 m2
- selective coat, copper sheet, physical vapour deposition: 9.29092e-8 m2
- sheet rolling, aluminium: 7.63594e-6 kg
- sheet rolling, chromium steel: 8.72679e-6 kg
- sheet rolling, copper: 3.0288e-7 kg
- sheet rolling, steel: 5.85422e-5 kg
- silicone product: 5.84312e-9 kg
- soft solder, Sn97Cu3: 8.91061e-10 kg
- solar collector factory: 2.16127e-14 unit
- solar glass, low-iron: 1.38205e-7 kg
- steel, chromium steel 18/8, hot rolled: 9.16117e-6 kg
- stone wool, packed: 1.49809e-6 kg
- synthetic rubber: 7.30632e-8 kg
- tap water: 9.4783e-9, 3.94996e-7, 1.56645e-8, 6.92523e-9, 2.92291e-8, 4.52014e-6, 1.02757e-8, 5.69378e-8, 7.8741e-8 kg (9 suppliers, which the file names only by identifier); sum of these 5.12238e-6 kg
- transport, passenger car: 3.63616e-5 km
- tube insulation, elastomere: 3.01128e-6 kg
- waste glass: -3.42292e-12, -1.97141e-10, -6.15956e-11, -1.19751e-11, -2.24753e-10, -4.72221e-10, -1.79512e-10, -5.12349e-9, -1.27487e-9, -2.32355e-10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 kg (42 suppliers, which the file names only by identifier); sum of these -6.31783e-8 kg
- waste glass sheet: -2.84762e-8, -8.65975e-9, -1.42038e-6 kg (3 suppliers, which the file names only by identifier); sum of these -1.45752e-6 kg
- waste mineral wool: -1.11639e-6, -8.78422e-10, -3.80819e-7 kg (3 suppliers, which the file names only by identifier); sum of these -1.49809e-6 kg
- waste paperboard, unsorted: -1.54694e-7, -2.78835e-8, -1.82577e-7 kg (3 suppliers, which the file names only by identifier); sum of these -3.65155e-7 kg
- waste plastic, mixture: -8.81431e-9, -9.58364e-11, -4.45405e-11, -1.28443e-11, -4.69308e-11, -8.58317e-11, -5.2175e-11, -5.96749e-11, -3.53028e-11, -1.01024e-9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 kg (43 suppliers, which the file names only by identifier); sum of these -7.88664e-8 kg
- waste polyethylene/polypropylene product: -1.69493e-6, -6.68575e-7 kg (2 suppliers, which the file names only by identifier); sum of these -2.36351e-6 kg
- wastewater, average: -2.44444e-11, -3.26386e-10, -9.16716e-8, -2.09479e-8 m3 (4 suppliers, which the file names only by identifier); sum of these -1.1297e-7 m3
- water, completely softened: 1.2312e-5, 1.64477e-5 kg (2 suppliers, which the file names only by identifier); sum of these 2.87597e-5 kg
- wire drawing, copper: 8.72679e-6 kg
- zinc coat, coils: 1.2363e-6 m2

## Inputs from nature
- Occupation, industrial area [natural resource, land]: 5.7815e-7 m2*year
- Transformation, from unspecified [natural resource, land]: 1.15448e-8 m2
- Transformation, to industrial area [natural resource, land]: 1.15448e-8 m2
- Water, unspecified natural origin [natural resource, in water]: 2.31303e-5 m3

## Emissions to nature
- Water [air, unspecified]: 3.47462e-6 m3
- Water [water, unspecified]: 1.95831e-5 m3
