# heat production, light fuel oil, at boiler 100kW condensing, non-modulating

Dataset: EcoSpold 2, unit process
Geography: RoW
Time period: 1991-01-01 to 2022-12-31
Technology level: current
Classification: ISIC rev.4 ecoinvent: 3530:Steam and air conditioning supply
Classification: EcoSpold01Categories: oil/heating systems
Tags: ConvertedDataset
Scenario: Business-as-Usual
System model: Allocation at the point of substitution
Generated by: Niels Jungbluth
Published in: Jungbluth, N. 2007
Database: ecoinvent
isCopyrightProtected: true

## General comment
Inventory for the operation of a light fuel oil boiler. Data related to input.
[This dataset was already contained in the ecoinvent database version 2. It was not individually updated during the transfer to ecoinvent version 3. Life Cycle Impact Assessment results may still have changed, as they are affected by changes in the supply chain, i.e. in other datasets. This dataset was generated following the ecoinvent quality guidelines for version 2. It may have been subject to central changes described in the ecoinvent version 3 change report (http://www.ecoinvent.org/database/ecoinvent-version-3/reports-of-changes/), and the results of the central updates were reviewed extensively. The changes added e.g. consistent water flows and other information throughout the database. The documentation of this dataset can be found in the ecoinvent reports of version 2, which are still available via the ecoinvent website. The change report linked above covers all central changes that were made during the conversion process.]

## Included activities end
Direct air emissions from combustion, waste, effluents and electricity use.

## Geography
Assumption for operation in Switzerland.

## Technology
Non-modulating, condensing boiler sold in 2000.

## Time period
New data for regulated emissions like NOx, particles, other figures are partly based on older literature data.

## Reference product
- heat, central or small-scale, other than natural gas: 1 MJ; By-product classification allocatable product; CPC 17300: Steam and hot water
  EcoSpold01Location=CH
  production volume 2.91417e12 MJ
    Assumption. The original value from the dataset was altered in order to model the correct shares of central or small-scale heat producing datasets on the market for heat, central or small-scale, other than natural gas. See talk pages for further discussion.
    //Original comment from global dataset//:
    Total heat from oil calculated from IEA Oil statistics for 2007 (http://www.iea.org/stats/oildata.asp?COUNTRY_CODE=29 ; residential, commercial and agriculture), using default IEA MJ/kg conversion factors, dividing the total evenly over 4 boiler types, multiplied by conversion efficiency of specific boiler type (1.0), all on a net heat value basis.
  property price 0.0106 EUR2005
    Average European district heat price from Ecoheatcool and Euroheat 2005-2006, Ecoheat Work package 1: The European heat market. Final report. 10.6 EUR/GJ i s the price of district heat. http://www.solarthermalworld.org/files/Ecoheatcool%20WP1%20Web.pdf?download
  properties: Corresponding fuel use 1 MJ, carbon allocation 0 kg, carbon content 0, heating value, net 1 MJ

## Inputs from technosphere
- chimney: 2.97607e-7 m; lognormal variance with pedigree 0.3546, pedigree (3,3,5,5,1)
  Calculated
  EcoSpold01Location=CH
  Uncertainty: Calculated
- condensate from light oil boiler: -9.83598e-6 m3; name condensate; lognormal variance with pedigree 0.3226, pedigree (3,3,4,5,1)
  EcoSpold01Location=CH
  Literature, basic uncertainity = 3
  Uncertainty: Literature, basic uncertainity = 3
  production volume
    Calculated from the production volume of light fuel oil, burned in boiler 100kW condensing, non-modulating in proportion to the respective output amounts.
  properties: carbon content, fossil 0.0740793, dry mass 0.337476 kg, water content 2962.17, wet mass 1000 kg
  note on carbon content, fossil: 0.025 kg TOC/m3 (Tab A.18, ecoinvent v2.2 report 13_I). TOC was considered as Total Carbon.
- electricity, low voltage: 5.68963e-5, 0.000112755, 0.00108313, 1.93215e-5, 0.000387109, 3.51369e-6 kWh (6 suppliers, which the file names only by identifier); sum of these 0.00166273 kWh; lognormal variance with pedigree 0.0446, pedigree (3,3,5,5,1)
  Literature
  EcoSpold01Location=CH
  Uncertainty: Literature
- hazardous waste, for incineration: -4.14982e-6 kg; name haz_waste; lognormal variance with pedigree 0.0226, pedigree (3,3,4,5,1)
  Literature
  EcoSpold01Location=CH
  Uncertainty: Literature
  production volume
    (same comment as for condensate from light oil boiler)
  properties: carbon content, fossil 0.554667, dry mass 0.75 kg, heating value, net 17 MJ, water content 0.333333, wet mass 1 kg
  note on carbon content, fossil: Tab A.6, ecoinvent v2.2 report 13_I. C content has been calculated after data in the tables, and then referred to 1 kg DM
  note on heating value, net: Value taken from the general comment of the treatment dataset.
- light fuel oil: 0.0199879, 0.00198395, 0.00019076, 0.000141766, 0.000131653, 0.000983012 kg (6 suppliers, which the file names only by identifier); sum of these 0.023419 kg; lognormal variance with pedigree 0.0446, pedigree (3,3,5,5,1)
  EcoSpold01Location=CH
  Literature
  Uncertainty: Literature
  properties: carbon content, fossil 0.862, dry mass 1 kg, heating value, net 42.6 MJ, wet mass 1 kg
- oil boiler, 100kW: 6.61352e-8 unit; lognormal variance with pedigree 0.3546, pedigree (3,3,5,5,1)
  EcoSpold01Location=CH
  Estimation 2100h use per year
  Uncertainty: Estimation 2100h use per year
- oil storage, 3000l: 1.76362e-7 unit; lognormal variance with pedigree 0.3546, pedigree (3,3,5,5,1)
  Calculated
  EcoSpold01Location=CH
  Uncertainty: Calculated

## Emissions to nature
- Acetaldehyde [air, urban air close to ground]: 2.04991e-8 kg; lognormal variance with pedigree 0.8546, pedigree (3,3,5,5,1)
  Literature, basic uncertainity estimated = 6
  Uncertainty: Literature, basic uncertainity estimated = 6
- Acetone [air, urban air close to ground]: 4.99979e-8 kg; lognormal variance with pedigree 0.8546, pedigree (3,3,5,5,1)
  (same comment as for Acetaldehyde)
- Acrolein [air, urban air close to ground]: 1.14995e-8 kg; lognormal variance with pedigree 0.8546, pedigree (3,3,5,5,1)
  (same comment as for Acetaldehyde)
- Benzaldehyde [air, urban air close to ground]: 5.99974e-9 kg; lognormal variance with pedigree 0.8546, pedigree (3,3,5,5,1)
  (same comment as for Acetaldehyde)
- Benzene [air, urban air close to ground]: 1.99991e-8 kg; lognormal variance with pedigree 0.8546, pedigree (3,3,5,5,1)
  (same comment as for Acetaldehyde)
- Butane [air, urban air close to ground]: 1.49994e-7 kg; lognormal variance with pedigree 0.8546, pedigree (3,3,5,5,1)
  (same comment as for Acetaldehyde)
- Carbon dioxide, fossil [air, urban air close to ground]: 0.0739968 kg; lognormal variance with pedigree 0.0446, pedigree (3,3,5,5,1)
  Literature
  Uncertainty: Literature
- Carbon monoxide, fossil [air, urban air close to ground]: 7.49968e-6 kg; lognormal variance with pedigree 0.932, pedigree (1,1,5,5,1)
  Deviation calculated
- Copper ion [air, urban air close to ground]: 3.99983e-10 kg; lognormal variance with pedigree 0.6946, pedigree (3,3,5,5,1)
  Literature
  Uncertainty: Literature
- Dinitrogen monoxide [air, urban air close to ground]: 6.9997e-7 kg; lognormal variance with pedigree 0.5246, pedigree (3,3,5,5,1)
  Literature, basic uncertainty estimated = 4
  Uncertainty: Literature, basic uncertainty estimated = 4
- Dioxins, measured as 2,3,7,8-tetrachlorodibenzo-p-dioxin [air, urban air close to ground]: 5.69976e-17 kg; lognormal variance with pedigree 0.3546, pedigree (3,3,5,5,1)
  Literature
  Uncertainty: Literature
- Ethane [air, urban air close to ground]: 1.99991e-8 kg; lognormal variance with pedigree 0.8546, pedigree (3,3,5,5,1)
  (same comment as for Acetaldehyde)
- Ethylene [air, urban air close to ground]: 4.99979e-8 kg; lognormal variance with pedigree 0.8546, pedigree (3,3,5,5,1)
  (same comment as for Acetaldehyde)
- Ethyne [air, urban air close to ground]: 9.99957e-9 kg; lognormal variance with pedigree 0.8546, pedigree (3,3,5,5,1)
  (same comment as for Acetaldehyde)
- Formaldehyde [air, urban air close to ground]: 5.99974e-9 kg; lognormal variance with pedigree 0.8546, pedigree (3,3,5,5,1)
  (same comment as for Acetaldehyde)
- Hydrocarbons, aliphatic, alkanes, unspecified [air, urban air close to ground]: 2.49989e-7 kg; lognormal variance with pedigree 0.8546, pedigree (3,3,5,5,1)
  (same comment as for Acetaldehyde)
- Hydrocarbons, aliphatic, unsaturated [air, urban air close to ground]: 1.99991e-8 kg; lognormal variance with pedigree 0.8546, pedigree (3,3,5,5,1)
  (same comment as for Acetaldehyde)
- Hydrocarbons, aromatic [air, urban air close to ground]: 1.99991e-8 kg; lognormal variance with pedigree 0.8546, pedigree (3,3,5,5,1)
  (same comment as for Acetaldehyde)
- Hydrogen fluoride [air, urban air close to ground]: 4.49981e-9 kg; lognormal variance with pedigree 0.0946, pedigree (3,3,5,5,1)
  Literature
  Uncertainty: Literature
- Mercury II [air, urban air close to ground]: 4.99979e-10 kg; lognormal variance with pedigree 0.6946, pedigree (3,3,5,5,1)
  Literature
  Uncertainty: Literature
- Methane, fossil [air, urban air close to ground]: 1.99991e-7 kg; lognormal variance with pedigree 0.8546, pedigree (3,3,5,5,1)
  (same comment as for Acetaldehyde)
- Nitrogen oxides [air, urban air close to ground]: 2.74988e-5 kg; lognormal variance with pedigree 0.112, pedigree (1,1,5,5,1)
  Deviation calculated
- PAH, polycyclic aromatic hydrocarbons [air, urban air close to ground]: 4.5998e-10 kg; lognormal variance with pedigree 0.3546, pedigree (3,3,5,5,1)
  Literature
  Uncertainty: Literature
- Particulate Matter, < 2.5 um [air, urban air close to ground]: 4.99979e-7 kg; lognormal variance with pedigree 0.3546, pedigree (3,3,5,5,1)
  Literature, basic uncertainty estimated = 3
  Uncertainty: Literature, basic uncertainty estimated = 3
- Pentane [air, urban air close to ground]: 9.99957e-8 kg; lognormal variance with pedigree 0.8546, pedigree (3,3,5,5,1)
  (same comment as for Acetaldehyde)
- Propanal [air, urban air close to ground]: 5.99974e-9 kg; lognormal variance with pedigree 0.8546, pedigree (3,3,5,5,1)
  (same comment as for Acetaldehyde)
- Propane [air, urban air close to ground]: 2.99987e-8 kg; lognormal variance with pedigree 0.8546, pedigree (3,3,5,5,1)
  (same comment as for Acetaldehyde)
- Propene [air, urban air close to ground]: 1.99991e-8 kg; lognormal variance with pedigree 0.8546, pedigree (3,3,5,5,1)
  (same comment as for Acetaldehyde)
- Sulfur dioxide [air, urban air close to ground]: 4.5667e-5 kg; lognormal variance with pedigree 0.0446, pedigree (3,3,5,5,1)
  Calculated
  Uncertainty: Calculated
- Toluene [air, urban air close to ground]: 9.99957e-9 kg; lognormal variance with pedigree 0.8546, pedigree (3,3,5,5,1)
  (same comment as for Acetaldehyde)
- Zinc II [air, urban air close to ground]: 4.99979e-10 kg; lognormal variance with pedigree 0.6946, pedigree (3,3,5,5,1)
  Literature
  Uncertainty: Literature

## Sampling procedure
Data published in literature based on measurements.

## Extrapolations
Some information from other European countries has been used to determine the emission factors. This dataset has been copied from an original dataset covering the geography CH. The uncertainty has been adjusted accordingly.

## Review by Michael Spielmann (obsolete) 2006-02-16
passed
none
