# operation, solar collector system, Cu flat plate collector, multiple dwelling, for hot water

Dataset: EcoSpold 2, unit process
Geography: CA-QC
Time period: 2002-01-01 to 2022-12-31
Technology level: current
Classification: ISIC rev.4 ecoinvent: 3530:Steam and air conditioning supply
Classification: EcoSpold01Categories: solar collector systems/systems
Tags: Recontextualization; Operation
Scenario: Business-as-Usual
System model: Allocation at the point of substitution
Generated by: Pascal Lesage
Published in: Jungbluth, N. 2007
Database: ecoinvent
isCopyrightProtected: true

## General comment
Use of a solar system excluding the necessary auxiliary heating.
[This dataset was already contained in the ecoinvent database version 2. It was not individually updated during the transfer to ecoinvent version 3. Life Cycle Impact Assessment results may still have changed, as they are affected by changes in the supply chain, i.e. in other datasets. This dataset was generated following the ecoinvent quality guidelines for version 2. It may have been subject to central changes described in the ecoinvent version 3 change report (http://www.ecoinvent.org/database/ecoinvent-version-3/reports-of-changes/), and the results of the central updates were reviewed extensively. The changes added e.g. consistent water flows and other information throughout the database. The documentation of this dataset can be found in the ecoinvent reports of version 2, which are still available via the ecoinvent website. The change report linked above covers all central changes that were made during the conversion process.]
Child dataset exchanges identical to GLO dataset. Created to enable linking to regional markets (e.g. for electricity). Data quality indicators adjusted accordingly.

## Included activities end
Delivery of heat with a solar system including maintenance and electricity use for operation. Excluding the necessary auxiliary heating.

## Geography
Solar collector system operated in CH.
Child dataset exchanges identical to GLO dataset. Created to enable linking to regional markets (e.g. for electricity). Data quality indicators adjusted accordingly.

## Technology
Operation of a solar system, not including the necessary additional heating.

## Time period
Time of simulation.

## Parameters
- Quebec gross domestic product 2011: 3.11e11 USD(2011); name quebecGDP2011; lognormal variance with pedigree 0.0006, pedigree (1,1,1,1,1)
  Quebec Gross domestic product for 2011, expressed in 2011 USD. Source: Institut de la statistique du Québec. Converted from CAD to USD using a yearly average exchange rate of 0.989 CAD/USD (Source: bank of Canada).
- world gross domestic product 2011: 7e13 USD(2011); name worldGDP2011; lognormal variance with pedigree 0.0006, pedigree (1,1,1,1,1)
  World Gross domestic product for 2011, expressed in 2011 USD. Source: World Bank.

## Reference product
- heat, central or small-scale, other than natural gas: 1 MJ; By-product classification allocatable product; CPC 17300: Steam and hot water
  production volume 2.66571e6 MJ
    Child dataset exchanges identical to GLO dataset. Created to enable linking to regional markets (e.g. for electricity). Data quality indicators adjusted accordingly.
  property price 0.0106 EUR2005
    Average European district heat price from Ecoheatcool and Euroheat 2005-2006, Ecoheat Work package 1: The European heat market. Final report. 10.6 EUR/GJ i s the price of district heat. http://www.solarthermalworld.org/files/Ecoheatcool%20WP1%20Web.pdf?download
  properties: carbon allocation 0 kg, carbon content 0, heating value, net 1 MJ

## Inputs from technosphere
- electricity, low voltage: 0.0015579 kWh; lognormal variance with pedigree 0.0512, pedigree (2,5,5,5,1)
  Simulation
  Uncertainty: S
- solar collector system, Cu flat plate collector, multiple dwelling, hot water: 2.5707e-7 unit; lognormal variance with pedigree 0.3506, pedigree (2,5,5,5,1)
  Simulation
  Uncertainty: S

## Inputs from nature
- Energy, solar, converted [natural resource, in air]: 1.1315 MJ; lognormal variance with pedigree 0.0411891, pedigree (2,1,5,1,1)
  Includes losses in the system.

## Sampling procedure
Simulation done by SPF Rapperswil with Polysun 3.3 computer programme.

## Extrapolations
none This dataset has been copied from an original dataset covering the geography CH. The uncertainty has been adjusted accordingly.Child dataset exchanges identical to GLO dataset. Created to enable linking to regional markets (e.g. for electricity). Data quality indicators adjusted accordingly.
