# treatment of sewage sludge, 97% water, WWT, WW from particle board production, landfarming

Dataset: EcoSpold 2, unit process
Geography: RoW
Time period: 2000-01-01 to 2022-12-31
Technology level: current
Classification: ISIC rev.4 ecoinvent: 3821:Treatment and disposal of non-hazardous waste
Scenario: Business-as-Usual
System model: Allocation at the point of substitution
Generated by: Nikolia Stoikou
Database: ecoinvent
isCopyrightProtected: true

## General comment
The process represents the treatment of a waste (sewage sludge) that is exclusively produced from another waste treatment. Recommended use of this dataset: to be used within the specific chain of treatments for 'wastewater from particle board production'. Share of biogenic carbon in the sludge: 98.98%.

## Included activities start
The activity starts with the waste being available for landfarming. Collection and transportation of the waste to this process is not included.

## Included activities end
The activity ends with the waste being treated and waste-specific emissions from the landfarming process are released to the environment (air, water and soil). The activity is considering local fate of emissions and the initial specific wastewater composition (generating the sewage sludge). Further, it includes provision of fertiliser functions for N, P, K, if present in the sludge.

## Geography
The site has mean annual temperature (MAT) of 16.743579766537 degC, mean annual precipitation (MAP) of 1250.84108527132 mm/year, mean annual actual evaporation (EAT) of 460.58904958214 mm/year. Climate will influence the local fate emissions based on the elemental composition of the sludge as well as water evaporation to air (= consumptive water use).
References: UN data, 2020. Precipitation, Environment Statistics Database, United Nations Statistics Division Available at: http://data.un.org/Data.aspx?q=precipitation&d=ENV&f=variableID%3a6;
World Bank, 2022. Surface area (sq.km), World Bank Group Available at: https://data.worldbank.org/indicator/AG.SRF.TOTL.K2;
Doka G.,2021. A model for composition-specific life cycle inventories of regionalised wastewater fates, Zurich, Switzerland. http://www.doka.ch/publications.htm

## Technology
Landfarming is the process of spreading a substrate on agricultural soil. Sewage sludge is generated in the wastewater treatment of wastewater from particle board production. Spreading of liquid sewage sludge (97w% water content) on agricultural fields with mobile vacuum tanker.

## Reference product
- organic nitrogen fertiliser, as N: 1 kg; By-product classification allocatable product; CPC 34659: Fertilizers n.e.c.
  gross fertilizer function provided from sewage sludge spreading on agricultural fields.
  production volume 4.82173 kg
    Calculated in proportion to wastewater reference product.
  property nitrogen content 1
    Nitrogen content (on a dry matter basis) of organic nitrogen fertiliser, as N is calculated from the molecular formula of the substance (Nitrogen).
  property price 0.473 EUR2005
    Set equal to the price of the corresponding inorganic fertiliser
  properties: carbon allocation 0 kg, carbon content 0, carbon content, fossil 0, carbon content, non-fossil 0, dry mass 1 kg, water content 0, water in wet mass 0 kg, wet mass 1 kg

## Inputs from technosphere
- agricultural trailer: 2.01761e-5 kg
- aluminium sulfate, powder: 0.000536329 kg
- aluminium, cast alloy: 0.000481056 kg
- ammonium sulfate: 1.86516e-6, 6.09727e-6 kg (2 suppliers, which the file names only by identifier); sum of these 7.96243e-6 kg
- bark chips, wet, measured as dry mass: 1.82773e-6, 8.80708e-5, 2.06212e-5, 2.8289e-7 kg (4 suppliers, which the file names only by identifier); sum of these 0.000110803 kg
- biowaste: -0.00164945 kg
- building, hall: 2.83665e-8 m2
- cast iron: 0.000481056 kg
- chemical, organic: 0.000239784 kg
- chromium steel pipe: 4.2678e-6 kg
- corrugated board box: 2.79431e-5, 6.48587e-5, 2.53756e-5, 1.04088e-6 kg (4 suppliers, which the file names only by identifier); sum of these 0.000119218 kg
- diesel: 7.52347e-7, 7.61699e-8, 1.5721e-6, 5.26988e-8, 7.42905e-6, 1.79209e-8 kg (6 suppliers, which the file names only by identifier); sum of these 9.90028e-6 kg
- diesel, burned in agricultural machinery: 0.01289 MJ
- diesel, burned in building machine: 0.00997127 MJ
- diesel, burned in diesel-electric generating set, 18.5kW: 0.000268147 MJ
- dust collector, electrostatic precipitator, for industrial use: 7.60251e-10 unit
- electricity, medium voltage: 0.00396557, 0.00835872, 2.85605e-8, 0.00255917, 3.38806e-7, 1.76823e-6, 3.92938e-7, 1.93242e-7, 3.07714e-7, 3.81769e-7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 kWh (32 suppliers, which the file names only by identifier); sum of these 0.0407671 kWh
- extrusion of plastic sheets and thermoforming, inline: 0.00017569 kg
- furnace, wood chips, softwood storage area, 1000kW: 3.77167e-9 unit
- furnace, wood chips, with silo, 300kW: 1.66122e-11 unit
- furnace, wood chips, with silo, 5000kW: 1.59459e-8 unit
- glued laminated timber, average glue mix: 7.75414e-7, 1.68357e-6 m3 (2 suppliers, which the file names only by identifier); sum of these 2.45898e-6 m3
- hazardous waste, for incineration: -2.87163e-5 kg
- heat, district or industrial, natural gas: 0.00562836, 2.15014e-5, 0.0681597, 3.53323e-7 MJ (4 suppliers, which the file names only by identifier); sum of these 0.0738099 MJ
- heat, district or industrial, other than natural gas: 0.000312199, 0.00182652, 4.64794e-5, 0.00855671, 0.00770757, 8.46194e-7, 0.00437343, 0.00240128 MJ (8 suppliers, which the file names only by identifier); sum of these 0.025225 MJ
- heavy fuel oil: 6.14888e-5, 5.17401e-7, 2.63037e-6, 6.63749e-7, 8.88527e-7, 1.26681e-5 kg (6 suppliers, which the file names only by identifier); sum of these 7.88569e-5 kg
- lubricating oil: 0.000316202, 4.8366e-5 kg (2 suppliers, which the file names only by identifier); sum of these 0.000364568 kg
- medium density fibreboard: 1.60791e-7, 1.02978e-6 m3 (2 suppliers, which the file names only by identifier); sum of these 1.19057e-6 m3
- melamine formaldehyde resin: 0.00338121 kg
- melamine urea formaldehyde adhesive: 4.52019e-6 kg
- metal working, average for chromium steel product manufacturing: 4.2678e-6 kg
- metal working, average for steel product manufacturing: 0.00128015 kg
- methylene diphenyl diisocyanate: 0.00110421 kg
- municipal solid waste: -3.57123e-9, -1.28596e-9, -2.52572e-6, -8.99861e-10 kg (4 suppliers, which the file names only by identifier); sum of these -2.53147e-6 kg
- paraffin: 0.00106911 kg
- particleboard, uncoated: 3.2345e-6, 1.5626e-6 m3 (2 suppliers, which the file names only by identifier); sum of these 4.7971e-6 m3
- phenolic resin: 0.000414935 kg
- plywood: 6.1217e-8, 1.29886e-6 m3 (2 suppliers, which the file names only by identifier); sum of these 1.36008e-6 m3
- polyethylene terephthalate, granulate, amorphous: 3.76479e-5 kg
- polypropylene, granulate: 0.000138042 kg
- polyurethane adhesive: 4.05262e-6 kg
- pulpwood, hardwood, measured as solid wood under bark: 8.27328e-7 m3
- pulpwood, softwood, measured as solid wood under bark: 8.941e-5 m3
- residual softwood, wet: 2.84233e-7 m3
- sawdust, wet, measured as dry mass: 0.000166571, 0.00816642 kg (2 suppliers, which the file names only by identifier); sum of these 0.00833299 kg
- sawlog and veneer log, eucalyptus ssp., measured as solid wood under bark: 7.45921e-6, 5.23451e-8 m3 (2 suppliers, which the file names only by identifier); sum of these 7.51155e-6 m3
- sawlog and veneer log, softwood, measured as solid wood under bark: 2.23628e-8, 4.67153e-6, 5.29132e-8 m3 (3 suppliers, which the file names only by identifier); sum of these 4.7468e-6 m3
- sawnwood, board, softwood, raw, dried (u=10%): 1.0838e-6 m3
- sawnwood, hardwood, dried (u=10%), planed: 6.86572e-8, 2.78758e-8 m3 (2 suppliers, which the file names only by identifier); sum of these 9.6533e-8 m3
- scrap aluminium: -0.000152595, -7.15939e-6, -0.000321302 kg (3 suppliers, which the file names only by identifier); sum of these -0.000481056 kg
- scrap steel: -2.20419e-7, -0.000541888, -0.000173974 kg (3 suppliers, which the file names only by identifier); sum of these -0.000716083 kg
- shed, large, wood, non-insulated, fire-unprotected: 7.63274e-8 m2
- slab and siding, softwood, wet, measured as dry mass: 0.00881425, 5.15814e-5, 0.0341781, 6.62523e-7 kg (4 suppliers, which the file names only by identifier); sum of these 0.0430446 kg
- steel in car shredder residue: -0.000179063 kg
- steel, low-alloyed: 0.000179063 kg
- steel, low-alloyed, hot rolled: 0.0017628 kg
- synthetic rubber: 5.43564e-5 kg
- tap water: 0.00011362, 0.0480972, 0.00473496, 0.000187776, 0.00035038, 0.0541846, 0.000123179, 0.000943899 kg (8 suppliers, which the file names only by identifier); sum of these 0.108736 kg
- tractor, 4-wheel, agricultural: 2.44741e-5 kg
- urea: 7.24117e-5, 9.15805e-6, 6.18345e-5 kg (3 suppliers, which the file names only by identifier); sum of these 0.000143404 kg
- urea formaldehyde resin: 0.0158228, 7.18104e-5 kg (2 suppliers, which the file names only by identifier); sum of these 0.0158946 kg
- used intermodal shipping container, 20-foot: -1.77044e-7 unit
- used intermodal shipping container, 40-foot: -8.49729e-8 unit
- used intermodal shipping container, 40-foot, high-cube: -1.16525e-7 unit
- used intermodal shipping container, 45-foot, high-cube: -1.74751e-8 unit
- waste mineral oil: -1.69934e-6, -0.000180228, -6.86436e-5 kg (3 suppliers, which the file names only by identifier); sum of these -0.000250571 kg
- waste paperboard: -7.94856e-7, -5.18417e-7, -9.66948e-5, -5.20519e-6, -1.27832e-5, -2.80058e-7, -2.87215e-6, -6.9503e-8 kg (8 suppliers, which the file names only by identifier); sum of these -0.000119218 kg
- waste polyethylene/polypropylene product: -0.000124931, -4.92799e-5, -1.47876e-6 kg (3 suppliers, which the file names only by identifier); sum of these -0.00017569 kg
- waste rubber, unspecified: -1.07027e-6, -2.54949e-5, -2.55641e-5 kg (3 suppliers, which the file names only by identifier); sum of these -5.21292e-5 kg
- waste wood, post-consumer: -0.00426608, -0.00257837 kg (2 suppliers, which the file names only by identifier); sum of these -0.00684445 kg
- waste wood, untreated: -3.28453e-7, -3.01369e-6, -4.49251e-6, -0.000480021, -1.90629e-6, -5.71011e-5, -1.26181e-5 kg (7 suppliers, which the file names only by identifier); sum of these -0.000559481 kg
- wastewater from particle board production: -6.77972e-9, -2.46139e-5 m3 (2 suppliers, which the file names only by identifier); sum of these -2.46207e-5 m3
- wastewater, unpolluted: -1.96752e-7, -4.06859e-5 m3 (2 suppliers, which the file names only by identifier); sum of these -4.08826e-5 m3
- welding, arc, steel: 2.33954e-5 m
- wood ash mixture, pure: -1.48586e-8, -7.22821e-7, -0.000276353 kg (3 suppliers, which the file names only by identifier); sum of these -0.000277091 kg
- wood chips, dry, measured as dry mass: 0.0687935 kg
- wood chips, from post-consumer wood, measured as dry mass: 0.062446 kg
- wood chips, wet, measured as dry mass: 1.96016e-5, 0.0086512 kg (2 suppliers, which the file names only by identifier); sum of these 0.0086708 kg
- wood preservation, pressure vessel, creosote, outdoor use, ground contact: 0.000398618 kg
- wooden board factory, organic bonded boards: 1.35786e-11, 1.92687e-13 unit (2 suppliers, which the file names only by identifier); sum of these 1.37713e-11 unit
- zinc coat, pieces: 0.000132368 m2

## Inputs from nature
- Water, cooling, unspecified natural origin [natural resource, in water]: 2.17761e-5 m3
- Water, well, in ground [natural resource, in water]: 6.75555e-7 m3

## Emissions to nature
- Acetaldehyde [air, unspecified]: 3.79561e-10 kg
- Acetaldehyde [air, urban air close to ground]: 1.50714e-7 kg
- Acetone [air, unspecified]: 1.91907e-7 kg
- Ammonia [air, unspecified]: 1.07646e-8 kg
- Ammonia [air, urban air close to ground]: 1.25351e-6 kg
- Arsenic ion [air, unspecified]: 6.22231e-12 kg
- Arsenic ion [air, urban air close to ground]: 7.24572e-10 kg
- Benzene [air, unspecified]: 5.6623e-9 kg
- Benzene [air, urban air close to ground]: 6.5936e-7 kg
- Benzene, ethyl- [air, unspecified]: 1.86669e-10 kg
- Benzene, ethyl- [air, urban air close to ground]: 2.17372e-8 kg
- Benzene, hexachloro- [air, unspecified]: 4.48007e-17 kg
- Benzene, hexachloro- [air, urban air close to ground]: 5.21692e-15 kg
- Benzo(a)pyrene [air, unspecified]: 3.11116e-12 kg
- Benzo(a)pyrene [air, urban air close to ground]: 3.62286e-10 kg
- Bromine [air, unspecified]: 3.73339e-10 kg
- Bromine [air, urban air close to ground]: 4.34743e-8 kg
- Cadmium II [air, unspecified]: 4.35562e-12 kg
- Cadmium II [air, urban air close to ground]: 5.072e-10 kg
- Calcium [air, unspecified]: 3.64005e-8 kg
- Calcium [air, urban air close to ground]: 4.23874e-6 kg
- Carbon dioxide, fossil [air, unspecified]: 0.000276794 kg
- Carbon dioxide, non-fossil [air, unspecified]: 0.00147709 kg
- Carbon dioxide, non-fossil [air, urban air close to ground]: 0.0775292 kg
- Carbon monoxide, fossil [air, unspecified]: 5.55855e-8 kg
- Carbon monoxide, non-fossil [air, unspecified]: 1.20656e-5 kg
- Carbon monoxide, non-fossil [air, urban air close to ground]: 0.000144914 kg
- Chlorine [air, unspecified]: 1.12002e-9 kg
- Chlorine [air, urban air close to ground]: 1.30423e-7 kg
- Chromium III [air, unspecified]: 2.46404e-11 kg
- Chromium III [air, urban air close to ground]: 2.8693e-9 kg
- Chromium VI [air, unspecified]: 2.48893e-13 kg
- Chromium VI [air, urban air close to ground]: 2.89829e-11 kg
- Copper ion [air, unspecified]: 1.36891e-10 kg
- Copper ion [air, urban air close to ground]: 1.59406e-8 kg
- Dinitrogen monoxide [air, unspecified]: 1.45031e-8 kg
- Dinitrogen monoxide [air, urban air close to ground]: 1.66651e-6 kg
- Dioxins, measured as 2,3,7,8-tetrachlorodibenzo-p-dioxin [air, unspecified]: 1.92892e-16 kg
- Dioxins, measured as 2,3,7,8-tetrachlorodibenzo-p-dioxin [air, urban air close to ground]: 2.24617e-14 kg
- Fluorine [air, unspecified]: 3.11116e-10 kg
- Fluorine [air, urban air close to ground]: 3.62286e-8 kg
- Formaldehyde [air, unspecified]: 1.04945e-6 kg
- Formaldehyde [air, urban air close to ground]: 3.1643e-5 kg
- Heat, waste [air, non-urban air or from high stacks]: 5.39079e-5 MJ
- Hydrocarbons, aliphatic, alkanes, unspecified [air, unspecified]: 1.51021e-8 kg
- Hydrocarbons, aliphatic, alkanes, unspecified [air, urban air close to ground]: 6.5936e-7 kg
- Hydrocarbons, aliphatic, unsaturated [air, unspecified]: 1.92892e-8 kg
- Hydrocarbons, aliphatic, unsaturated [air, urban air close to ground]: 2.24617e-6 kg
- Lead II [air, unspecified]: 1.55558e-10 kg
- Lead II [air, urban air close to ground]: 1.81143e-8 kg
- Magnesium [air, unspecified]: 2.24003e-9 kg
- Magnesium [air, urban air close to ground]: 2.60846e-7 kg
- Manganese II [air, unspecified]: 1.05779e-9 kg
- Manganese II [air, urban air close to ground]: 1.23177e-7 kg
- Mercury II [air, unspecified]: 1.86669e-12 kg
- Mercury II [air, urban air close to ground]: 2.17372e-10 kg
- Methane, fossil [air, urban air close to ground]: 9.7276e-9 kg
- Methane, non-fossil [air, unspecified]: 1.221e-8 kg
- Methane, non-fossil [air, urban air close to ground]: 1.08686e-6 kg
- Methanol [air, non-urban air or from high stacks]: 6.06971e-6 kg
- NMVOC, non-methane volatile organic compounds [air, unspecified]: 2.09729e-6 kg
- NMVOC, non-methane volatile organic compounds [air, urban air close to ground]: 0.000139349 kg
- Nickel II [air, unspecified]: 3.73339e-11 kg
- Nickel II [air, urban air close to ground]: 4.34743e-9 kg
- Nitrogen oxides [air, unspecified]: 2.39295e-6 kg
- Nitrogen oxides [air, urban air close to ground]: 0.000163029 kg
- PAH, polycyclic aromatic hydrocarbons [air, unspecified]: 6.90677e-11 kg
- PAH, polycyclic aromatic hydrocarbons [air, urban air close to ground]: 8.04275e-9 kg
- Particulate Matter, < 2.5 um [air, unspecified]: 3.33003e-7 kg
- Particulate Matter, < 2.5 um [air, urban air close to ground]: 1.81143e-5 kg
- Particulate Matter, > 10 um [air, unspecified]: 2.72427e-5 kg
- Particulate Matter, > 2.5 um and < 10um [air, unspecified]: 5.46775e-7 kg
- Phenol, pentachloro- [air, unspecified]: 5.04007e-14 kg
- Phenol, pentachloro- [air, urban air close to ground]: 5.86903e-12 kg
- Phosphorus [air, unspecified]: 1.86669e-9 kg
- Phosphorus [air, urban air close to ground]: 2.17372e-7 kg
- Potassium I [air, unspecified]: 1.45602e-7 kg
- Potassium I [air, urban air close to ground]: 1.6955e-5 kg
- Sodium [air, unspecified]: 8.08901e-9 kg
- Sodium [air, urban air close to ground]: 9.41943e-7 kg
- Sulfur dioxide [air, unspecified]: 1.55558e-8 kg
- Sulfur dioxide [air, urban air close to ground]: 9.35176e-6 kg
- Sulfur trioxide [air, unspecified]: 9.84272e-8 kg
- Toluene [air, unspecified]: 1.86669e-9 kg
- Toluene [air, urban air close to ground]: 2.17372e-7 kg
- Water [air, unspecified]: 9.69526e-6 m3
- Zinc II [air, unspecified]: 1.86669e-9 kg
- Zinc II [air, urban air close to ground]: 2.17372e-7 kg
- m-Xylene [air, unspecified]: 7.46678e-10 kg
- m-Xylene [air, urban air close to ground]: 8.69486e-8 kg
- Oils, unspecified [soil, industrial]: 9.15201e-8 kg
- Oils, unspecified [soil, unspecified]: 2.77862e-5 kg
- Formaldehyde [water, unspecified]: 4.20186e-10 kg
- Suspended solids, unspecified [water, unspecified]: 1.40446e-7 kg
- Water [water, unspecified]: 2.84173e-7 m3
