# nuclear fuel factory construction

Dataset: EcoSpold 2, unit process
Geography: RoW
Time period: 1980-01-01 to 2022-12-31
Technology level: current
Classification: ISIC rev.4 ecoinvent: 4100:Construction of buildings
Classification: EcoSpold01Categories: nuclear power/production
Tags: ConvertedDataset
Scenario: Business-as-Usual
System model: Allocation at the point of substitution
Generated by: Roberto Dones
Published in: Dones, R. 2007
Database: ecoinvent
isCopyrightProtected: true

## General comment
Data on the construction of a UO2 (no MOX mixed oxides, no RepU reprocessed fuel, and no HEU highly enriched uranium from warheads) fuel fabrication facility are pretty old and representing reference plants form US Studies on total material & energy use in energy chains. It is roughly assumed that 100% of concrete with reinforcing bars are dumped in an depository for inerts.
[This dataset was already contained in the ecoinvent database version 2. It was not individually updated during the transfer to ecoinvent version 3. Life Cycle Impact Assessment results may still have changed, as they are affected by changes in the supply chain, i.e. in other datasets. This dataset was generated following the ecoinvent quality guidelines for version 2. It may have been subject to central changes described in the ecoinvent version 3 change report (http://www.ecoinvent.org/database/ecoinvent-version-3/reports-of-changes/), and the results of the central updates were reviewed extensively. The changes added e.g. consistent water flows and other information throughout the database. The documentation of this dataset can be found in the ecoinvent reports of version 2, which are still available via the ecoinvent website. The change report linked above covers all central changes that were made during the conversion process.]

## Included activities end
The module includes: land use of the factory; energy (electricity and diesel) and material requirements for the construction of the facility; transport requirements during construction; energy and transport requirements (for non-contaminated inerts concrete with reinforcing bars) during decommissioning; disposal of the non-contaminated inerts. The non contaminated metals are assumed to be recycled.

## Geography
North American and European conditions

## Technology
Information regards facilities operating in the 1980s.

## Reference product
- nuclear fuel factory: 1 unit; By-product classification allocatable product; CPC 53121: Industrial buildings
  EcoSpold01Location=GLO
  production volume 0.150321 unit
    Calculated from electricity demand, using the input/output relationships of the Swiss datasets
  property price 4.23657e8 EUR2005
    EU27 I/O database(in the 'EU & DK Input Output Database' (available in SimaPro)); -79 Building, non-residential EU 27 (calculated to be 38.169 EUR2003/kg). Based on consumption of (_53 Iron basic, virgin, EU27;7.25517782294095E-3 kg/EUR building; 0.45 EUR2003 per kg DS), (_61 Iron, after first processing, EU27;5.8766830719783E-3kg/EUR building; 0.62 EUR2003 per kg DS), (_65 Fabricated metal products, except machinery, EU27; 8.9167022775554E-3 kg/EUR building; 3.63 EUR2003 per kg DS) and (_66 Machinery and equipment n.e.c., EU27;4.15071881936446E-3 kg/EUR building; 5.71 EUR2003 per kg DS) - 11184500 kg
  properties: carbon allocation 0 kg, carbon content 0

## Inputs from technosphere
- aluminium, cast alloy: 160 kg; lognormal variance with pedigree 0.16, pedigree (1,1,5,1,1)
  EcoSpold01Location=RER
  old reference
  properties: dry mass 1 kg, wet mass 1 kg
- aluminium, wrought alloy: 340 kg; lognormal variance with pedigree 0.16, pedigree (1,1,5,1,1)
  old reference
  EcoSpold01Location=RER
  properties: dry mass 1 kg, wet mass 1 kg
- cast iron: 360000 kg; lognormal variance with pedigree 0.16, pedigree (1,1,5,1,1)
  EcoSpold01Location=RER
  old reference
  properties: carbon content, fossil 0.04, dry mass 1 kg, wet mass 1 kg
  note on carbon content, fossil: Cast iron is made by remelting pig iron in small furnaces (e.g. cupola furnaces or electric arc furnaces) and poured into moulds to make castings. It usually contains 2% to 6% carbon (ecoinvent v2.2 report 10_partII). An average content of 4% was considered
- concrete, normal strength: 215.577, 41.117, 30.7918, 454.321, 47.3396, 383.248, 16252.8, 74.8245 m3 (8 suppliers, which the file names only by identifier); sum of these 17500 m3; lognormal variance with pedigree 0.16, pedigree (1,1,5,1,1)
  old reference
  EcoSpold01Location=CH
  properties: dry mass 2190 kg, water content 0.086758, wet mass 2380 kg
- copper, cathode: 330000 kg; lognormal variance with pedigree 0.16, pedigree (1,1,5,1,1)
  EcoSpold01Location=RER
  old reference
  properties: dry mass 1 kg, wet mass 1 kg
- diesel, burned in building machine: 4.6e8 MJ; lognormal variance with pedigree 0.16, pedigree (1,1,5,1,1)
  EcoSpold01Location=GLO
  old reference
  properties: heating value, net 1 MJ
- electricity, medium voltage: 2125.07, 2869.38, 4126.72, 861.422, 50456.3, 2725.05, 1020.44, 12877.1, 84959.1, 31369.6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 kWh (46 suppliers, which the file names only by identifier); sum of these 750000 kWh; lognormal variance with pedigree 0.16, pedigree (1,1,5,1,1)
  old reference
  EcoSpold01Location=UCTE
- manganese: 80000 kg; lognormal variance with pedigree 0.16, pedigree (1,1,5,1,1)
  EcoSpold01Location=RER
  old reference
  properties: dry mass 1 kg, wet mass 1 kg
- plywood: 63.4639, 1346.54 m3 (2 suppliers, which the file names only by identifier); sum of these 1410 m3; lognormal variance with pedigree 0.16, pedigree (1,1,5,1,1)
  EcoSpold01Location=RER
  old reference
  properties: carbon content, fossil 0.09783, carbon content, non-fossil 0.409818, dry mass 768.6 kg, heating value, net 11688.9 MJ, price 400 EUR2005, water content 0.070778, wet mass 823 kg
- reinforcing steel: 2.1e6 kg; lognormal variance with pedigree 0.16, pedigree (1,1,5,1,1)
  EcoSpold01Location=RER
  old reference
  properties: carbon content, fossil 0.004, dry mass 1 kg, wet mass 1 kg
- steel, chromium steel 18/8, hot rolled: 300000 kg; lognormal variance with pedigree 0.16, pedigree (1,1,5,1,1)
  EcoSpold01Location=RER
  old reference
  properties: carbon content, fossil 0.0008, dry mass 1 kg, wet mass 1 kg
  note on carbon content, fossil: Stainless steel model is the grade 304 steel (18/8 stainless, 18% chromium 8% nickel; max. 0.08% C)
- steel, low-alloyed, hot rolled: 8e6 kg; lognormal variance with pedigree 0.16, pedigree (1,1,5,1,1)
  EcoSpold01Location=RER
  old reference
  properties: carbon content, fossil 0.005, dry mass 1 kg, wet mass 1 kg
  note on carbon content, fossil: Low alloyed steel composition given in Tab. 3.2 ecoinvent v2.2 report 10_partII. Steel assumed to have a C content of 0.5%
- waste reinforced concrete: -2.88568e6, -30576, -4.11837e7 kg (3 suppliers, which the file names only by identifier); sum of these -4.41e7 kg
  own assumption
  EcoSpold01Location=CH
  production volume
    Calculated from the production volume of nuclear fuel factory in proportion to the respective output amounts.
  properties: dry mass 0.99418 kg, water content 0.00585407, wet mass 1 kg
- zinc: 14000 kg; lognormal variance with pedigree 0.16, pedigree (1,1,5,1,1)
  EcoSpold01Location=RER
  old reference
  properties: dry mass 1 kg, wet mass 1 kg

## Inputs from nature
All rows: lognormal variance with pedigree 0.16, pedigree (1,1,5,1,1)
- Occupation, industrial area [natural resource, land]: 360000 m2*year
  own assumption
- Transformation, from industrial area [natural resource, land]: 100000 m2
  own assumption
- Transformation, from unspecified [natural resource, land]: 100000 m2
  own assumption
- Transformation, to industrial area [natural resource, land]: 100000 m2
  own assumption
- Transformation, to unspecified [natural resource, land]: 100000 m2
  own assumption

## Sampling procedure
Literature

## Review by Hans-Jörg Althaus 2007-10-26
Passed
