# manual dismantling of used passenger car with internal combustion engine

Dataset: EcoSpold 2, unit process
Geography: GLO
Time period: 2005-01-01 to 2022-12-31
Technology level: current
Classification: ISIC rev.4 ecoinvent: 3830:Materials recovery
Classification: EcoSpold01Categories: waste management/recycling
Tags: Treatment
Scenario: Business-as-Usual
System model: Allocation at the point of substitution
Generated by: Andrea Del Duce
Published in: Hischier R. 2007
Database: ecoinvent
isCopyrightProtected: true

## General comment
This dataset describes the treatment of a used internal combustion engine passenger car. The entries are given for the treatment of 1 kg of car and involves the manual dismantling of the car into its various modules (glider and drivetrain). The treatment of the used glider and drivetrain is described in the respective datsets.
[This dataset was already contained in the ecoinvent database version 2. It was not individually updated during the transfer to ecoinvent version 3. Life Cycle Impact Assessment results may still have changed, as they are affected by changes in the supply chain, i.e. in other datasets. This dataset was generated following the ecoinvent quality guidelines for version 2. It may have been subject to central changes described in the ecoinvent version 3 change report (http://www.ecoinvent.org/database/ecoinvent-version-3/reports-of-changes/), and the results of the central updates were reviewed extensively. The changes added e.g. consistent water flows and other information throughout the database. The documentation of this dataset can be found in the ecoinvent reports of version 2, which are still available via the ecoinvent website. The change report linked above covers all central changes that were made during the conversion process.]

## Included activities start
The dataset takes as input the used car and describes its manual dismantling, including the treatment facility, which has been modelled with infrastructure and efforts from the electronics waste industry.

## Included activities end
The waste fractions of the materials (rubber, glass and waste oil) produced in the dismantling are accounted for in the vehicle production.

## Geography
data of situation in Switzerland

## Technology
current manual dismantling activities in Switzerland.

## Reference product
- manual dismantling of used passenger car with internal combustion engine: 1 unit; By-product classification allocatable product; CPC 894: Materials recovery (recycling) services, on a fee or contract basis
  production volume 7.2e10 unit
    Based on the very rough assumption of 60 million cars of 1200 kg being produced in 2012 http://www.worldometers.info/cars/.
  property price 0.00337898 EUR2005
    Calculated based on inputs: The price of the product has been calculated as a sum of the values of the material and energy inputs for this product. This value is therefore a rough estimation. It may underestimate the real price since there are additional expenses when producing any product. These expences can include for example labour costs, treatment of waste materials and profit for the producer. Please consider carefully whether this level of data quality is acceptable for your application.
  properties: carbon allocation 0 kg, carbon content 0

## Inputs from technosphere
- manual treatment facility, waste electric and electronic equipment: 1.6e-8 unit; lognormal variance with pedigree 0.578, pedigree (4,5,5,5,5)
  EcoSpold01Location=GLO
  Rough estimation of infrastructure
  Uncertainty: rough estimation of infrastructure

## Sampling procedure
This dataset has been obtained adapting the dataset "treatment of used industrial electronic device, manual dismantling"from ecoinvent version v2.2.

## Extrapolations
none This dataset has been copied from an original dataset covering the geography CH. The uncertainty has been adjusted accordingly.

## Review by Christian Bauer 2012-09-13
passed
