# treatment of wastewater from liquid crystal production, wastewater treatment

Dataset: EcoSpold 2, unit process
Geography: CH
Time period: 2010-01-01 to 2022-12-31
Technology level: current
Classification: ISIC rev.4 ecoinvent: 3700:Sewerage
Scenario: Business-as-Usual
System model: Allocation at the point of substitution
Generated by: Nikolia Stoikou
Database: ecoinvent
isCopyrightProtected: true

## General comment
This dataset represents the treatment of a wastewater, generated from an ordinary transforming activity. Purification in wastewater treatment of 'wastewater from liquid crystal production'. Recommended use of this dataset: to be used for wastewaters, generated from ordinary transforming activities, of equal or similar composition. The wastewater has a content of TOC: 49.109 kg/m3, COD: 191.45809 kg/m3 and BOD: 92.59909 kg/m3. TOC is equal to C present in the wastewater, COD is calculated as TOC/0.2565 and BOD is calculated as COD/0.53034. Detailed elemental composition can be found in the properties of the wastewater treated. Share of biogenic carbon in the sludge: 0%.

## Included activities start
The activity starts with the wastewater being available at the gate of the treatment facility. Collection and transportation of the wastewater to the treatment plant is not included.

## Included activities end
The activity ends with the wastewater being treated and waste-specific emissions released to the environment. Expenditures from treatment of wastewater in waste treatment plant are included as well as relevant infrastructure of the plant. Emissions from any sludge digestion, biogas generation and utilization (heeding specific wastewater composition) are also included. Waste-specific direct emissions of untreated wastewater and required territory-specific infrastructure for sewers are not contained within this dataset but instead in the regional market datasets for this wastewater.

## Geography
The site has mean annual temperature (MAT) of 9.5 degC, mean annual precipitation (MAP) of 1483.00559816076 mm/year, mean annual actual evaporation (EAT) of 528.63778611689 mm/year. In the WWT plant, 0% of its water input are lost due to evaporation from pools, 2.63% of water is *gained* from organic mass degradation, and 5.1% is removed off site via sludge disposal. (References: UN data, 2020. Precipitation, Environment Statistics Database, United Nations Statistics Division Available at: http://data.un.org/Data.aspx?q=precipitation&d=ENV&f=variableID%3a6; World Bank, 2022. Surface area (sq.km), World Bank Group Available at: https://data.worldbank.org/indicator/AG.SRF.TOTL.K2; MeteoSwiss, 2022. Data on Swiss temperature mean, Federal Department of Home Affairs FDHA. Federal Office of Meteorology and Climatology. Swiss Climate Available at: https://www.MeteoSwiss.admin.ch/home/climate/swiss-climate-in-detail/Swiss-temperature-mean/Data-on-the-Swiss-temperature-mean.html?query=TEMPERATURE+DATA&topic=/content/MeteoSwiss/tags/topics/klima&pageIndex=0&tab=search_tab; Doka G.,2021. A model for composition-specific life cycle inventories of regionalised wastewater fates, Zurich, Switzerland. http://www.doka.ch/publications.htm)

## Technology
This activity represents the treatment of a specific wastewater in a WWT plant (while direct emissions and sewering are heeded in the upstream market dataset for this wastewater). The size of the treatment plant infrastructure is for a national average territory situation. The assumed size of the WWTP treats 90.6 Mio m3 per year. The mixture of WWTP with one, two, or three stages is 0%-11.2%-88.8%. The actual, waste-specific oxygen requirement in the biological stages is 39.94kg O. Generated waste-specific raw sludge is treated with anaerobic digestion. The digestion process produces 38490 litres of biogas with an energy content of 891.2MJ. 23.6% of the biogas is utilized for energy. The remainder is flared. The gross electric efficiency is 26.564%. The gross thermal efficiency is 47.853%. After digestion, the remaining total sludge mass (dry matter) is 31.57kg DM.

## Reference product
- iron scrap, sorted, pressed: 1 kg; By-product classification Recyclable; CPC 39310: Slag, dross, scalings and other waste from the manufacture of iron or steel; lognormal variance with pedigree 0.3109, pedigree (1,1,1,1,1)
  scrap output from used infrastructure for wastewater treatment plant.
  Uncertainty: Uncertainty calculated from wastewater technosphere fate uncertainty and treatment infrastructure uncertainty.
  production volume 5.77291e-9 kg
    Calculated in proportion to wastewater reference product.
  property price 0.175 EUR2005
    Temporary price data. Calculated as 90% of purchasers price based on: 2005 import and export prices (total trades (USD) divided by total weight (kg) in biggest economies of the world: EU27, USA, Brasil, China, India, Japan and Russia) from UN Commodity Trade Statistics Database (http://data.un.org/Explorer.aspxDatabase [Accessed 2011.06.20]). Commodity: Waste or scrap, of cast iron
  properties: carbon allocation 0 kg, carbon content 0, carbon content, fossil 0, carbon content, non-fossil 0, dry mass 1 kg, water content 0, water in wet mass 0 kg, wet mass 1 kg

## Inputs from technosphere
- acetone, liquid: 0.000240003, 0.000776012 kg (2 suppliers, which the file names only by identifier); sum of these 0.00101602 kg
- borax, anhydrous, powder: 9.00565e-6 kg
- boric acid, anhydrous, powder: 7.20089e-5 kg
- carbon dioxide, liquid: 0.000392775, 8.26804e-5 kg (2 suppliers, which the file names only by identifier); sum of these 0.000475456 kg
- chemical factory, organics: 3.15655e-12 unit
- chemical, organic: 0.00497055 kg
- cyclohexane: 0.000383719 kg
- dimethyl sulfoxide: 0.00141058 kg
- dipropylene glycol monomethyl ether: 0.00327055, 0.000688953 kg (2 suppliers, which the file names only by identifier); sum of these 0.0039595 kg
- electricity, medium voltage: 1.2714 kWh
- ethanol, without water, in 99.7% solution state, from ethylene: 0.000357678, 0.000796437 kg (2 suppliers, which the file names only by identifier); sum of these 0.00115411 kg
- ethyl acetate: 9.54857e-5 kg
- heat, district or industrial, natural gas: 0.38693 MJ
- heat, district or industrial, other than natural gas: 1.23295 MJ
- heptane: 0.00101602 kg
- hydrochloric acid, without water, in 30% solution state: 0.000100121, 0.00044833 kg (2 suppliers, which the file names only by identifier); sum of these 0.000548451 kg
- hydrogen, liquid: 5.55458e-8, 2.54191e-7 kg (2 suppliers, which the file names only by identifier); sum of these 3.09737e-7 kg
- inert waste: -1.35339e-5, -1.16563e-7, -4.77051e-5 kg (3 suppliers, which the file names only by identifier); sum of these -6.13555e-5 kg
- methyl ethyl ketone: 3.46628e-5, 1.30801e-5 kg (2 suppliers, which the file names only by identifier); sum of these 4.77429e-5 kg
- monochloropentafluoroethane: 2.7028e-5 kg
- municipal solid waste: -1.41358e-6, -8.3046e-5, -5.09012e-7, -0.00099974, -3.56187e-7 kg (5 suppliers, which the file names only by identifier); sum of these -0.00108507 kg
- nitric acid, without water, in 50% solution state: 2.41152e-5, 0.00031372, 3.58314e-5, 8.91061e-5, 0.00011588, 4.2695e-5, 0.000146843, 3.87127e-5, 3.56988e-5, 0.000272055 kg (10 suppliers, which the file names only by identifier); sum of these 0.00111466 kg
- nitrogen, liquid: 0.00905548, 0.00248567 kg (2 suppliers, which the file names only by identifier); sum of these 0.0115411 kg
- polyester resin, unsaturated: 7.85647e-6, 5.3795e-5 kg (2 suppliers, which the file names only by identifier); sum of these 6.16514e-5 kg
- polyethylene terephthalate, granulate, amorphous: 0.00625392 kg
- solvent, organic: 0.000815732 kg
- spent solvent mixture: -0.00607234, -5.55881e-5, -0.00237267 kg (3 suppliers, which the file names only by identifier); sum of these -0.0085006 kg
- steam, in chemical industry: 0.00214384, 0.0121593 kg (2 suppliers, which the file names only by identifier); sum of these 0.0143031 kg
- sulfuric acid: 0.00137824, 0.000180303 kg (2 suppliers, which the file names only by identifier); sum of these 0.00155855 kg
- tetrahydrofuran: 0.000376814 kg
- toluene, liquid: 0.00239353, 0.000319137 kg (2 suppliers, which the file names only by identifier); sum of these 0.00271266 kg
- wastewater from liquid crystal production: -1.73262e-5, -8.37873e-8 m3 (2 suppliers, which the file names only by identifier); sum of these -1.741e-5 m3

## Inputs from nature
- Water, unspecified natural origin [natural resource, in water]: 0.0205176 m3

## Emissions to nature
- Ethyl acetate [air, urban air close to ground]: 2.40687e-7 kg
- Heptane [air, urban air close to ground]: 7.66451e-6 kg
- Hydrocarbons, chlorinated [air, urban air close to ground]: 2.76198e-5 kg
- Hydrochloric acid [air, urban air close to ground]: 7.22062e-7 kg
- Methyl ethyl ketone [air, urban air close to ground]: 1.33167e-5 kg
- NMVOC, non-methane volatile organic compounds [air, urban air close to ground]: 7.66451e-6 kg
- Toluene [air, urban air close to ground]: 5.36614e-6 kg
- Water [air, unspecified]: 0.00125157 m3
- BOD5, Biological Oxygen Demand [water, surface water]: 0.000132181 kg
- COD, Chemical Oxygen Demand [water, surface water]: 0.000217999 kg
- DOC, Dissolved Organic Carbon [water, surface water]: 8.07405e-5 kg
- Nitrogen [water, surface water]: 5.63247e-5 kg
- Phosphorus [water, surface water]: 2.44633e-6 kg
- Suspended solids, unspecified [water, surface water]: 6.37229e-5 kg
- TOC, Total Organic Carbon [water, surface water]: 8.07405e-5 kg
- Water [water, unspecified]: 0.0192486 m3
