# cellulose fibre production

Dataset: EcoSpold 2, unit process
Geography: RoW
Time period: 2012-01-01 to 2022-12-31
Technology level: current
Classification: ISIC rev.4 ecoinvent: 1709:Manufacture of other articles of paper and paperboard
Synonyms: cellulose insulation; Zellulosedämmstoff
Scenario: Business-as-Usual
System model: Allocation at the point of substitution
Share of production covered: 100 %
Generated by: Nora Minas
Published in: isofloAG/sinum AG 2014
Database: ecoinvent
isCopyrightProtected: true

## General comment
This dataset has been generated as a copy of the original dataset for the geography CH.
The process describes the production of 1 kg of cellulose fibre from waste paper (post-consumer) used as an insulation material in buildings. Cellulose fibre used for insulation applications has a thermal conductivity of 0.038 W/mK at a density of 30-60kg/m3. The activity starts with the delivery of sorted waste paper and includes the production process. During production, aluminium hydroxide and boric acid are added as flame retardant. The inventory ends, when insulation material can be provided to customer (not including installation (blowing in) or transport to building site).

Packaging has also been excluded from the dataset. According to isofloc, 1 Kg of cellulose fibre is linked to the following packaging requirement: 9.87E-04 Kg of plastic foil, 7.26E-03 of PE-bags, and 3.77E-04 Kg of palettes.

Reference:

Datenblatt isofloc eco, https://isofloc.ch/assets/Produkte/Zellulosefasern-eco/20150327-isofloc-eco-BUeT-de-mail.pdf

isofloc AG/sinum AG (2014) ECOPRO Effizienz Profil 2012. Bütschwil, Switzerland.
[This dataset is meant to replace the following datasets:
- cellulose fibre production, inclusive blowing in, GLO, 1995 - 2000]

## Included activities start
The activity starts with 'waste paper, sorted' and the other process inputs being available to the recycling facility.

## Included activities end
The activity ends with 'waste paper, sorted' being recycled into cellulose fibre to be used as insulation material and ready for transportation at the gates of the production facility. Requirements for administration, packaging, and blowing in (including binder) are not covered by this inventory.

## Geography
Switzerland

## Technology
Data considered representative for production in Switzerland during the reference period.

## Reference product
- cellulose fibre: 1 kg; name RP; By-product classification allocatable product; CPC 32113: Mechanical wood pulp; semi-chemical wood pulp; pulps of fibrous cellulosic material other than wood
  production volume 1.89873e7 kg
    From figure 5 in Haupt et al. (2017), the production of cellulose (paper-based) insulation material in Switzerland in 2012 amounted to 6'000 tonnes of fibres. It is furthermore assumed that 8% of the final product is additives.
    The global PV was estimated by scaling the European PV according to the ratio of European and global GDP in 2018. Retrieved from UNSTATS: <https://unstats.un.org/unsd/snaama/Basic>, filtered for GDP at current price-US Dollars, las accessed May 2020
    Reference: Haupt, Melanie & Vadenbo, Carl & Hellweg, Stefanie. (2017). Do We Have the Right Performance Indicators for the Circular Economy?: Insight into the Swiss Waste Management System. Journal of Industrial Ecology. vol. 21, no. 3, pp. 615-627.
  property price 0.76 EUR2005
    The production volume of this product is small compared to other products supplied by the activities within the same ISIC 3 category. Therefore, an average price of products supplied by the activities in the same ISIC 3 code has been applied.This price is obtained as '_35 Paper and paper products, EU27' in the 'EU & DK Input Output Database' (available in SimaPro). The price is assumed to be valid for both RER2003, RER 2004, world 2003 and world 2004.
  properties: carbon allocation 0.46 kg, carbon content 0.46, carbon content, fossil 0, carbon content, non-fossil 0.46, dry mass 1 kg, water content 0, water in wet mass 0 kg, wet mass 1 kg

## Inputs from technosphere
- acrylic dispersion, with water, in 58% solution state: 6.58123e-5 kg
- acrylic varnish, with water, in 53% solution state: 2.1624e-5 kg
- aluminium scrap, post-consumer: -0.00137708 kg
- aluminium, wrought alloy: 0.00137708 kg
- chemical, inorganic: 2.0677e-6 kg
- chemical, organic: 2.0677e-6 kg
- chimney: 5.26026e-9 m
- copper scrap, sorted, pressed: -0.000124534 kg
- copper, cathode: 0.000138371 kg
- corrugated board box: 0.00145245, 0.00337129, 5.4104e-5 kg (3 suppliers, which the file names only by identifier); sum of these 0.00487785 kg
- diesel, low-sulfur: 4.18349e-9, 1.00824e-7, 5.24091e-8, 1.89467e-9, 2.80103e-10, 8.44383e-9, 4.22332e-9 kg (7 suppliers, which the file names only by identifier); sum of these 1.72259e-7 kg
- electricity, low voltage: 0.00112554, 0.00223056, 0.0214269, 0.000382224, 0.00765791, 6.95089e-5, 0.00530815, 0.00156312 kWh (8 suppliers, which the file names only by identifier); sum of these 0.0397639 kWh
- electricity, medium voltage: 8.0231e-5, 2.50346e-5, 0.00107284, 7.45531e-7, 3.80401e-6, 0.000229695, 1.2564e-5 kWh (7 suppliers, which the file names only by identifier); sum of these 0.00142491 kWh
- ethylene glycol monoethyl ether: 2.89795e-5 kg
- ethylene vinyl acetate copolymer: 1.14249e-5, 4.99601e-6 kg (2 suppliers, which the file names only by identifier); sum of these 1.64209e-5 kg
- extrusion, plastic film: 9.71851e-5 kg
- hazardous waste, for incineration: -9.58968e-6, -4.08665e-6, -1.06823e-7 kg (3 suppliers, which the file names only by identifier); sum of these -1.37832e-5 kg
- heat, district or industrial, natural gas: 0.000630565, 0.0232874, 0.0630574, 0.0010362 MJ (4 suppliers, which the file names only by identifier); sum of these 0.0880116 MJ
- heavy fuel oil: 1.30494e-6, 1.09805e-8, 5.58227e-8, 7.23827e-8, 1.40863e-8, 1.88567e-8, 6.45908e-7 kg (7 suppliers, which the file names only by identifier); sum of these 2.12298e-6 kg
- industrial furnace, 1MW, oil: 3.94525e-10 unit
- industrial furnace, natural gas: 2.19665e-9 unit
- industrial machine, heavy, unspecified: 1.20564e-5 kg
- isopropanol: 0.000120564 kg
- kraft paper: 0.0022127, 0.00102604 kg (2 suppliers, which the file names only by identifier); sum of these 0.00323875 kg
- lead: 0.000244185 kg
- light fuel oil: 6.74185e-7, 6.69182e-8, 6.43428e-9, 3.45423e-7, 4.78174e-9, 4.44061e-9, 3.31567e-8 kg (7 suppliers, which the file names only by identifier); sum of these 1.13534e-6 kg
- maintenance, transmission network, electricity, high voltage direct current subsea cable: 3.92264e-7 km*year
- maize starch: 3.05043e-5 kg
- municipal solid waste: -1.79425e-7, -5.56172e-5, -6.46087e-8, -0.000126897, -4.52107e-8 kg (5 suppliers, which the file names only by identifier); sum of these -0.000182803 kg
- natural gas, high pressure: 1.15322e-7, 4.86779e-8, 2.78792e-7, 8.27348e-8, 4.68037e-6, 4.78371e-7, 5.22181e-8, 1.54088e-9, 1.85419e-7, 1.94712e-7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 m3 (26 suppliers, which the file names only by identifier); sum of these 2.01159e-5 m3
- oil storage, 3000l: 4.93147e-9 unit
- packaging box factory: 4.78744e-12 unit
- packaging film, low density polyethylene: 8.04291e-5 kg
- paper, woodfree, coated: 0.0768732 kg
- polyethylene, high density, granulate: 9.71851e-5 kg
- polypropylene, granulate: 3.18715e-5 kg
- potato starch: 2.09919e-5 kg
- printing ink, offset, without solvent, in 47.5% solution state: 1.11136e-5, 0.000538087 kg (2 suppliers, which the file names only by identifier); sum of these 0.0005492 kg
- scrap copper: -6.20113e-7, -1.3217e-5 kg (2 suppliers, which the file names only by identifier); sum of these -1.38371e-5 kg
- scrap steel: -4.36793e-8, -3.44756e-5 kg (2 suppliers, which the file names only by identifier); sum of these -3.45193e-5 kg
- sheet rolling, aluminium: 0.00137708 kg
- spent solvent mixture: -5.96495e-5, -2.33071e-5 kg (2 suppliers, which the file names only by identifier); sum of these -8.29566e-5 kg
- steel, low-alloyed: 0.000345193 kg
- synthetic rubber: 9.89949e-6 kg
- textile, woven cotton: 1.55958e-5 kg
- thermoforming, with calendering: 2.20112e-5 kg
- waste emulsion paint: -1.42524e-5, -1.34349e-6 kg (2 suppliers, which the file names only by identifier); sum of these -1.55958e-5 kg
- waste paper, unsorted: -3.54413e-5, -0.0108128, -0.0108198 kg (3 suppliers, which the file names only by identifier); sum of these -0.021668 kg
- waste paperboard, unsorted: -0.00243893, -0.00243893 kg (2 suppliers, which the file names only by identifier); sum of these -0.00487785 kg
- waste plastic, mixture: -5.14523e-7, -2.59999e-9, -5.73645e-9, -1.83088e-6, -3.60195e-6, -3.43785e-8, -1.34838e-8, -1.41995e-8 kg (8 suppliers, which the file names only by identifier); sum of these -6.01775e-6 kg
- waste wire plastic: -3.18715e-5 kg
- white spirit: 0.000168679 kg
- wire drawing, copper: 0.000138371 kg
- zinc coat, coils: 5.54073e-6 m2

## Inputs from nature
- Occupation, seabed, infrastructure [natural resource, land]: 4.31491e-5 m2*year
- Transformation, from seabed, unspecified [natural resource, land]: 1.07873e-6 m2
- Transformation, to seabed, infrastructure [natural resource, land]: 1.07873e-6 m2
- Water, unspecified natural origin [natural resource, in water]: 2.43968e-6 m3

## Emissions to nature
- 2-Propanol [air, urban air close to ground]: 0.000120564 kg
- Acetaldehyde [air, urban air close to ground]: 1.37137e-11 kg
- Acetic acid [air, urban air close to ground]: 1.69395e-10 kg
- Acetone [air, urban air close to ground]: 1.29292e-11 kg
- Ammonia [air, urban air close to ground]: 9.23684e-12 kg
- Arsenic ion [air, urban air close to ground]: 1.12053e-12 kg
- Benzene [air, urban air close to ground]: 3.14645e-10 kg
- Benzene, ethyl- [air, urban air close to ground]: 5.359e-6 kg
- Benzo(a)pyrene [air, urban air close to ground]: 1.18219e-14 kg
- Butane [air, urban air close to ground]: 5.6675e-10 kg
- Calcium [air, urban air close to ground]: 9.48141e-12 kg
- Carbon dioxide, fossil [air, urban air close to ground]: 5.4874e-5 kg
- Carbon monoxide, fossil [air, urban air close to ground]: 2.47418e-9 kg
- Chromium III [air, urban air close to ground]: 4.26663e-13 kg
- Chromium VI [air, urban air close to ground]: 4.30972e-15 kg
- Cobalt II [air, urban air close to ground]: 2.84442e-12 kg
- Copper ion [air, urban air close to ground]: 4.04618e-11 kg
- Dinitrogen monoxide [air, urban air close to ground]: 1.80907e-10 kg
- Dioxins, measured as 2,3,7,8-tetrachlorodibenzo-p-dioxin [air, urban air close to ground]: 8.74478e-20 kg
- Ethanol [air, urban air close to ground]: 2.58584e-11 kg
- Formaldehyde [air, urban air close to ground]: 1.67489e-10 kg
- Heptane [air, urban air close to ground]: 5.24286e-5 kg
- Hydrocarbons, aliphatic, alkanes, unspecified [air, urban air close to ground]: 7.85165e-11 kg
- Hydrocarbons, aliphatic, unsaturated [air, urban air close to ground]: 2.58584e-12 kg
- Hydrocarbons, aromatic [air, urban air close to ground]: 1.46113e-11 kg
- Hydrochloric acid [air, urban air close to ground]: 1.29369e-10 kg
- Hydrogen fluoride [air, urban air close to ground]: 4.63985e-12 kg
- Iron ion [air, urban air close to ground]: 7.06797e-11 kg
- Lead II [air, urban air close to ground]: 1.24982e-11 kg
- Mercury II [air, urban air close to ground]: 6.43811e-14 kg
- Methane, fossil [air, urban air close to ground]: 1.88345e-9 kg
- Methanol [air, urban air close to ground]: 5.53049e-6 kg
- Molybdenum VI [air, urban air close to ground]: 6.89559e-13 kg
- Nickel II [air, urban air close to ground]: 4.22353e-11 kg
- Nitrogen oxides [air, urban air close to ground]: 2.5454e-8 kg
- PAH, polycyclic aromatic hydrocarbons [air, urban air close to ground]: 7.92756e-12 kg
- Particulate Matter, < 2.5 um [air, urban air close to ground]: 8.86523e-10 kg
- Particulate Matter, > 10 um [air, urban air close to ground]: 2.06867e-10 kg
- Particulate Matter, > 2.5 um and < 10um [air, urban air close to ground]: 1.03434e-10 kg
- Pentane [air, urban air close to ground]: 9.53148e-10 kg
- Propane [air, urban air close to ground]: 1.60612e-10 kg
- Propionic acid [air, urban air close to ground]: 1.56904e-11 kg
- Propylene oxide [air, urban air close to ground]: 1.00654e-5 kg
- Selenium IV [air, urban air close to ground]: 1.03434e-12 kg
- Sodium [air, urban air close to ground]: 6.46462e-11 kg
- Sulfur dioxide [air, urban air close to ground]: 3.70074e-8 kg
- Toluene [air, urban air close to ground]: 4.73422e-6 kg
- Vanadium V [air, urban air close to ground]: 8.61948e-11 kg
- Water [air, non-urban air or from high stacks]: 1.45443e-6 m3
- Xylene [air, urban air close to ground]: 4.73406e-6 kg
- Zinc II [air, urban air close to ground]: 4.38234e-11 kg
- BOD5, Biological Oxygen Demand [water, surface water]: 1.71857e-8 kg
- COD, Chemical Oxygen Demand [water, unspecified]: 1.37735e-6 kg
- DOC, Dissolved Organic Carbon [water, unspecified]: 5.10129e-7 kg
- TOC, Total Organic Carbon [water, unspecified]: 5.10129e-7 kg
- Water [water, unspecified]: 9.85256e-7 m3

## Sampling procedure
Data is based on the LCI provided by sinum AG and isofloc AG.

## Extrapolations
This dataset has been generated as a copy of the original dataset for the geography CH. The uncertainty has been adjusted accordingly
