# treatment of wood ash mixture, pure, municipal incineration with fly ash extraction

Dataset: EcoSpold 2, unit process
Geography: CH
Time period: 2006-01-01 to 2022-12-31
Technology level: current
Classification: ISIC rev.4 ecoinvent: 3821:Treatment and disposal of non-hazardous waste
Synonyms: municipal waste incineration
Scenario: Business-as-Usual
System model: Allocation at the point of substitution
Share of production covered: 1.8 %
Generated by: Gabor Doka
Published in: Doka G. 2015
Database: ecoinvent
isCopyrightProtected: true

## General comment
This dataset represents the activity of waste disposal of wood ash mixture, pure in a municipal solid waste incinerator (MSWI) // Recommended use of this dataset: For small amounts of wood ash from small scale furnaces, which go to disposal as part of communal waste mixture. Larger amounts will be landfilled or as fertilizer on suitable ground. // // Waste composition (wet, in ppm): H2O n.a.; O 445010; H n.a.; C 12000; S 9200; N n.a.; P 9800; B n.a.; Cl 3200; Br n.a.; F n.a.; I n.a.; Ag n.a.; As 6.7; Ba n.a.; Cd 14.2; Co 18; Cr 194.9; Cu 163.2; Hg 0.1; Mn 19956; Mo 3.7; Ni 55.2; Pb 65; Sb n.a.; Se n.a.; Sn n.a.; V 39.5; Zn 1662; Be n.a.; Sc n.a.; Sr n.a.; Ti 1383; Tl n.a.; W n.a.; Si 82600; Fe 22833; Ca 284400; Al 20800; K 54500; Mg 32100; Na n.a.; // Share of carbon in waste that is biogenic 100%. // Share of metals in waste not oxidised and bulk-recyclable (exclude very small or thin parts) Iron: 0%; Alu: 0%; Copper: 0%. // Recovery of metal scrap from bottom ash to recycling: 0g iron scrap, 0g aluminium scrap, 0g copper scrap.Ultimately one kg of this waste produces 1.085 kg of bottom ash (can include some washed ash) and 0 kg of residues, which are landfilled (technology mix). Net energy production: 0MJ/kg electric energy and 0MJ/kg thermal energy. //

## Included activities start
waste incineration from waste reception gate and delivery into waste bunker at incinerator plant site (without transports to the incinerator)

## Included activities end
Waste-specific short-term emissions to water from leachate. Long-term emissions from landfill to ground water.

## Geography
Specific to the technology mix encountered in Switzerland in 2012.

## Technology
average Swiss MSWI plants in 2010 (grate incinerators) with electrostatic precipitator for fly ash (ESP), wet flue gas scrubber and 25% SNCR , 42.77% SCR-high dust , 32.68% SCR-low dust -DeNOx facilities and 0% without Denox (weighted according to mass of burnt waste, representing Swiss average). Efficiency of iron scrap separation from slag : 58%. Efficiency of non-ferrous scrap separation from slag : 31%. The technology mix for this dataset includes a filter ash treatment (FLUWA) of a share of 46.22%. Gross electric efficiency technology mix 15.84% and Gross thermal efficiency technology mix 28.51%

## Time period
Waste composition as given in literature reference, theoretical data or other source. Transfer coefficients for modern MSWI.

## Reference product
- wood ash mixture, pure: -1 kg; By-product classification Waste; CPC 3928: Sawdust and wood waste and scrap
  Main reference product of this activity (supply of disposal service).
  production volume 1.4964e7 kg
    based on corresponding global production volume of MSW fraction in conventional MSWI (wo fly ash extraction) and scaled down to annual Swiss incinerated MSW mass of 3.02 mio. tonnes.
  property heating value, net 0 MJ
    Non combustible products are assumed to have an LHV equal to zero (0).
  property price 0 EUR2005
    Waste products are assigned a price of zero as they are assumed to require further treatment.
  properties: aluminium content 0.0208, arsenic content 6.7e-6, cadmium content 1.42e-5, calcium content 0.2844, carbon allocation 0.012 kg, carbon content 0.012, carbon content, non-fossil 0.012, chlorine content 0.0032, chromium content 0.0001949, cobalt content 1.8e-5, copper content 0.0001632, dry mass 1 kg, iron content 0.022833, lead content 6.5e-5, magnesium content 0.0321, manganese content 0.019956, mercury content 1e-7, molybdenum content 3.7e-6, nickel content 5.52e-5, oxygen content 0.44501, phosphorus content 0.0098, potassium content 0.0545, silicon content 0.0826, sulfur content 0.0092, titanium content 0.001383, vanadium content 3.95e-5, wet mass 1 kg, zinc content 0.001662

## Inputs from technosphere
- electricity, for reuse in municipal waste incineration only: 0.024944 kWh; name E_el_prod_MSWI; lognormal variance with pedigree 0.00859512, pedigree (1,1,4,1,1)
  Net electricity required to incinerate this waste (subsidiesed from high-calorific waste fractions).
  Uncertainty: uncertainty is calculated from uncertainties in waste composition and uncertainties in energy efficiency and the uncertainty in internal energy demand
- municipal waste incineration facility: 2.5e-10 unit
  Demands per kilogram waste.
- process-specific burdens, slag landfill: 1.085 kg; lognormal variance with pedigree 0.018967, pedigree (1,1,4,1,1)
  Mass-specific expenditures required for landfilling of bottom ash.;activityLink introduced to establish a direct link to the corresponding regional supply of this product
  Uncertainty: uncertainty is calculated from uncertainties in waste composition and transfer coefficients in incinerator
- slag landfill: 1.9289e-9 unit; lognormal variance with pedigree 0.018967, pedigree (1,1,4,1,1)
  Landfill infrastructure required for landfilling of bottom ash.
  Uncertainty: uncertainty is calculated from uncertainties in waste composition and transfer coefficients in incinerator
- transport, freight, lorry, unspecified: 0.0434 metric ton*km; lognormal variance with pedigree 0.018967, pedigree (1,1,4,1,1)
  Transport services to transport incineration residues to landfills and filter ash to external treatments (FLUWA).
  Uncertainty: uncertainty calculated from uncertainty of the waste composition of this waste, uncertainty of transfer coefficients and the uncertainty in generic transportation distances

## Emissions to nature
- Benzene [air, urban air close to ground]: 4.9984e-8 kg; lognormal variance with pedigree 0.0491, pedigree (1,1,4,1,1)
  Incomplete combustion product emitted to air.
  Uncertainty: uncertainty calculated from uncertainty in average operation emissions, and the uncertainty of the flue gas volume from this waste.
- Benzene, hexachloro- [air, urban air close to ground]: 1.0451e-10 kg; lognormal variance with pedigree 0.0491, pedigree (1,1,4,1,1)
  (same comment as for Benzene)
- Benzene, pentachloro- [air, urban air close to ground]: 2.6408e-10 kg; lognormal variance with pedigree 0.0491, pedigree (1,1,4,1,1)
  (same comment as for Benzene)
- Benzo(a)pyrene [air, urban air close to ground]: 1.1123e-12 kg; lognormal variance with pedigree 0.30974, pedigree (1,1,4,1,1)
  (same comment as for Benzene)
- Carbon monoxide, non-fossil [air, urban air close to ground]: 8.4967e-5 kg; lognormal variance with pedigree 0.65557, pedigree (1,1,4,1,1)
  (same comment as for Benzene)
- Dioxins, measured as 2,3,7,8-tetrachlorodibenzo-p-dioxin [air, urban air close to ground]: 9.9962e-14 kg; lognormal variance with pedigree 0.30974, pedigree (1,1,4,1,1)
  (same comment as for Benzene)
- Heat, waste [air, urban air close to ground]: 0.073087 MJ; lognormal variance with pedigree 0.00898726, pedigree (1,1,4,1,1)
  Waste heat generated from heating value of this waste plus any electricity required to process it.
  Uncertainty: uncertainty is calculated from uncertainties in waste composition and uncertainties in energy efficiency and the uncertainty in internal energy demand
- Methane, non-fossil [air, urban air close to ground]: 7.4976e-7 kg; lognormal variance with pedigree 0.0491, pedigree (1,1,4,1,1)
  (same comment as for Benzene)
- NMVOC, non-methane volatile organic compounds [air, urban air close to ground]: 2.2748e-6 kg; lognormal variance with pedigree 0.0491, pedigree (1,1,4,1,1)
  (same comment as for Benzene)
- Particulate Matter, < 2.5 um [air, urban air close to ground]: 5.9677e-6 kg; lognormal variance with pedigree 0.30974, pedigree (1,1,4,1,1)
  (same comment as for Benzene)
- Particulate Matter, > 2.5 um and < 10um [air, urban air close to ground]: 2.9989e-8 kg; lognormal variance with pedigree 0.12811, pedigree (1,1,4,1,1)
  (same comment as for Benzene)
- Phenol, pentachloro- [air, urban air close to ground]: 2.1767e-11 kg; lognormal variance with pedigree 0.0491, pedigree (1,1,4,1,1)
  (same comment as for Benzene)
- Toluene [air, urban air close to ground]: 9.9969e-8 kg; lognormal variance with pedigree 0.0491, pedigree (1,1,4,1,1)
  (same comment as for Benzene)
- Aluminium III [water, ground-, long-term]: 0.016991 kg; lognormal variance with pedigree 0.3003, pedigree (1,1,4,1,1)
  Long-term emissions from landfilling of incineration residues.
  Uncertainty: uncertainty is calculated from uncertainties in waste composition and transfer coefficients in incinerator and landfills.
- Aluminium III [water, surface water]: 2.7329e-7 kg; lognormal variance with pedigree 1.514, pedigree (1,1,4,1,1)
  Emissions to water from waste composition and transfer coefficients in incinerator and landfills.
  Uncertainty: uncertainty is calculated from uncertainties in waste composition and transfer coefficients in incinerator and landfills
- Arsenic ion [water, ground-, long-term]: 6.6899e-6 kg; lognormal variance with pedigree 1.3288, pedigree (1,1,4,1,1)
  (same comment as for Aluminium III)
- Arsenic ion [water, surface water]: 1.0078e-8 kg; lognormal variance with pedigree 1.9289, pedigree (1,1,4,1,1)
  (same comment as for Aluminium III)
- BOD5, Biological Oxygen Demand [water, ground-, long-term]: 0.0049419 kg; lognormal variance with pedigree 0.35372, pedigree (1,1,4,1,1)
  (same comment as for Aluminium III)
- BOD5, Biological Oxygen Demand [water, surface water]: 1.7838e-5 kg; lognormal variance with pedigree 0.84319, pedigree (1,1,4,1,1)
  (same comment as for Aluminium III)
- COD, Chemical Oxygen Demand [water, ground-, long-term]: 0.015108 kg; lognormal variance with pedigree 0.35372, pedigree (1,1,4,1,1)
  (same comment as for Aluminium III)
- COD, Chemical Oxygen Demand [water, surface water]: 5.4534e-5 kg; lognormal variance with pedigree 0.84319, pedigree (1,1,4,1,1)
  (same comment as for Aluminium III)
- Cadmium II [water, ground-, long-term]: 1.4193e-5 kg; lognormal variance with pedigree 1.2295, pedigree (1,1,4,1,1)
  (same comment as for Aluminium III)
- Cadmium II [water, surface water]: 7.3058e-9 kg; lognormal variance with pedigree 1.969, pedigree (1,1,4,1,1)
  (same comment as for Aluminium III)
- Calcium II [water, ground-, long-term]: 0.28316 kg; lognormal variance with pedigree 0.050029, pedigree (1,1,4,1,1)
  (same comment as for Aluminium III)
- Calcium II [water, surface water]: 0.0012409 kg; lognormal variance with pedigree 0.51541, pedigree (1,1,4,1,1)
  (same comment as for Aluminium III)
- Chloride [water, ground-, long-term]: 0.00043588 kg; lognormal variance with pedigree 0.53539, pedigree (1,1,4,1,1)
  (same comment as for Aluminium III)
- Chloride [water, surface water]: 0.0027641 kg; lognormal variance with pedigree 0.51664, pedigree (1,1,4,1,1)
  (same comment as for Aluminium III)
- Chromium VI [water, ground-, long-term]: 1.2753e-6 kg; lognormal variance with pedigree 4.1991, pedigree (1,1,4,1,1)
  (same comment as for Aluminium III)
- Chromium VI [water, surface water]: 5.5734e-9 kg; lognormal variance with pedigree 2.0025, pedigree (1,1,4,1,1)
  (same comment as for Aluminium III)
- Cobalt II [water, ground-, long-term]: 1.7997e-5 kg; lognormal variance with pedigree 1.1981, pedigree (1,1,4,1,1)
  (same comment as for Aluminium III)
- Cobalt II [water, surface water]: 2.5042e-9 kg; lognormal variance with pedigree 2.1099, pedigree (1,1,4,1,1)
  (same comment as for Aluminium III)
- Copper ion [water, ground-, long-term]: 0.00016319 kg; lognormal variance with pedigree 0.90486, pedigree (1,1,4,1,1)
  (same comment as for Aluminium III)
- Copper ion [water, surface water]: 5.6661e-9 kg; lognormal variance with pedigree 2.0005, pedigree (1,1,4,1,1)
  (same comment as for Aluminium III)
- DOC, Dissolved Organic Carbon [water, ground-, long-term]: 0.0059784 kg; lognormal variance with pedigree 0.35372, pedigree (1,1,4,1,1)
  (same comment as for Aluminium III)
- DOC, Dissolved Organic Carbon [water, surface water]: 2.1579e-5 kg; lognormal variance with pedigree 0.84319, pedigree (1,1,4,1,1)
  (same comment as for Aluminium III)
- Heat, waste [water, surface water]: 0.016711 MJ; lognormal variance with pedigree 0.00898726, pedigree (1,1,4,1,1)
  (same comment as for Heat, waste)
- Iron ion [water, ground-, long-term]: 0.011878 kg; lognormal variance with pedigree 0.38636, pedigree (1,1,4,1,1)
  (same comment as for Aluminium III)
- Iron ion [water, surface water]: 1.9105e-7 kg; lognormal variance with pedigree 1.5629, pedigree (1,1,4,1,1)
  (same comment as for Aluminium III)
- Lead II [water, ground-, long-term]: 6.4999e-5 kg; lognormal variance with pedigree 1.0274, pedigree (1,1,4,1,1)
  (same comment as for Aluminium III)
- Lead II [water, surface water]: 1.1865e-9 kg; lognormal variance with pedigree 2.208, pedigree (1,1,4,1,1)
  (same comment as for Aluminium III)
- Magnesium [water, ground-, long-term]: 0.031978 kg; lognormal variance with pedigree 0.2421, pedigree (1,1,4,1,1)
  (same comment as for Aluminium III)
- Magnesium [water, surface water]: 0.00012195 kg; lognormal variance with pedigree 0.72472, pedigree (1,1,4,1,1)
  (same comment as for Aluminium III)
- Manganese II [water, ground-, long-term]: 0.019955 kg; lognormal variance with pedigree 0.29476, pedigree (1,1,4,1,1)
  (same comment as for Aluminium III)
- Manganese II [water, surface water]: 1.0214e-6 kg; lognormal variance with pedigree 1.339, pedigree (1,1,4,1,1)
  (same comment as for Aluminium III)
- Mercury II [water, ground-, long-term]: 9.738e-8 kg; lognormal variance with pedigree 1.872, pedigree (1,1,4,1,1)
  (same comment as for Aluminium III)
- Mercury II [water, surface water]: 2.6198e-9 kg; lognormal variance with pedigree 2.126, pedigree (1,1,4,1,1)
  (same comment as for Aluminium III)
- Molybdenum VI [water, ground-, long-term]: 3.5276e-6 kg; lognormal variance with pedigree 1.407, pedigree (1,1,4,1,1)
  (same comment as for Aluminium III)
- Molybdenum VI [water, surface water]: 1.7239e-7 kg; lognormal variance with pedigree 1.6, pedigree (1,1,4,1,1)
  (same comment as for Aluminium III)
- Nickel II [water, ground-, long-term]: 5.5165e-5 kg; lognormal variance with pedigree 1.0491, pedigree (1,1,4,1,1)
  (same comment as for Aluminium III)
- Nickel II [water, surface water]: 3.476e-8 kg; lognormal variance with pedigree 1.7622, pedigree (1,1,4,1,1)
  (same comment as for Aluminium III)
- Phosphate [water, ground-, long-term]: 0.00039644 kg; lognormal variance with pedigree 5.0596, pedigree (1,1,4,1,1)
  (same comment as for Aluminium III)
- Phosphate [water, surface water]: 6.6184e-7 kg; lognormal variance with pedigree 1.5335, pedigree (1,1,4,1,1)
  (same comment as for Aluminium III)
- Potassium I [water, ground-, long-term]: 0.047914 kg; lognormal variance with pedigree 0.18791, pedigree (1,1,4,1,1)
  (same comment as for Aluminium III)
- Potassium I [water, surface water]: 0.0065863 kg; lognormal variance with pedigree 0.29082, pedigree (1,1,4,1,1)
  (same comment as for Aluminium III)
- Silicon [water, ground-, long-term]: 0.00070674 kg; lognormal variance with pedigree 5.8137, pedigree (1,1,4,1,1)
  (same comment as for Aluminium III)
- Silicon [water, surface water]: 3.0478e-6 kg; lognormal variance with pedigree 1.2343, pedigree (1,1,4,1,1)
  (same comment as for Aluminium III)
- Sulfate [water, ground-, long-term]: 0.025083 kg; lognormal variance with pedigree 0.38603, pedigree (1,1,4,1,1)
  (same comment as for Aluminium III)
- Sulfate [water, surface water]: 0.002517 kg; lognormal variance with pedigree 0.51386, pedigree (1,1,4,1,1)
  (same comment as for Aluminium III)
- TOC, Total Organic Carbon [water, ground-, long-term]: 0.0059784 kg; lognormal variance with pedigree 0.35372, pedigree (1,1,4,1,1)
  (same comment as for Aluminium III)
- TOC, Total Organic Carbon [water, surface water]: 2.1579e-5 kg; lognormal variance with pedigree 0.84319, pedigree (1,1,4,1,1)
  (same comment as for Aluminium III)
- Titanium ion [water, ground-, long-term]: 0.00041481 kg; lognormal variance with pedigree 0.98597, pedigree (1,1,4,1,1)
  (same comment as for Aluminium III)
- Titanium ion [water, surface water]: 6.6721e-9 kg; lognormal variance with pedigree 1.9789, pedigree (1,1,4,1,1)
  (same comment as for Aluminium III)
- Vanadium V [water, ground-, long-term]: 3.8606e-6 kg; lognormal variance with pedigree 2.4455, pedigree (1,1,4,1,1)
  (same comment as for Aluminium III)
- Vanadium V [water, surface water]: 1.7524e-8 kg; lognormal variance with pedigree 1.8526, pedigree (1,1,4,1,1)
  (same comment as for Aluminium III)
- Zinc II [water, ground-, long-term]: 0.001662 kg; lognormal variance with pedigree 0.59969, pedigree (1,1,4,1,1)
  (same comment as for Aluminium III)
- Zinc II [water, surface water]: 4.9474e-8 kg; lognormal variance with pedigree 1.7157, pedigree (1,1,4,1,1)
  (same comment as for Aluminium III)
