# treatment, sludge from pulp and paper production, landfarming

Dataset: EcoSpold 2, unit process
Geography: RoW
Time period: 2011-01-01 to 2022-12-31
Technology level: current
Classification: EcoSpold01Categories: agricultural means of production/work processes
Classification: ISIC rev.4 ecoinvent: 0161:Support activities for crop production
Scenario: Business-as-Usual
System model: Allocation at the point of substitution
Generated by: Hugues Imbeault-Tétreault
Database: ecoinvent
isCopyrightProtected: true

## General comment
This dataset represents the service of the spreading of sludge from pulp and paper production on agricultural fields. The sludge is a mix of sludge from primary and secondary wastewater treatment and from a deinking process. The reference flow is one kg of pulp and paper sludge (wet mass) loaded from storage unit at the farm, transported to farmlands and spread as organic fertilisers with solid manure spreader. It is assumed the sludge is applied to maize cropland (25%), soybeans (35%) and cultivated grassland (40%). The dataset is heavily parameterized and could be used as a template for sludges with other compositions insofar as sludge composition is changed in the reference flow exchange properties and the plausibility of values for context-specific parameters (e.g. ammonia emissions) are checked.

## Included activities start
From sludge loading into solid manure spreader with hydraulic loader at farm.

## Included activities end
This activity ends with pulp and paper sludge application on farmlands. The dataset includes loading from storage unit at farm, on-farm transportation and application of 1 kg of sludge on farmland. The land surface on which 1 kg of sludge is applied was calculated to be 5.5E-5 ha, given the amount of nutrients contained in the sludge, the fertilising needs of the crops and the crop distribution that receives this sludge in Quebec (Canada). The inventory takes into account the emissions related to sludge application with machinery. For the sludge emission inventory, the emissions of various substances and compounds (N, P, K, metals, dioxins/furanes) are taken into account. Metals are considered to be entirely emitted in the agricultural soil. Emitted metal speciations remain unknown. The inventory also takes into account the liming effect (CaCO3-eq) of the sludge. The dataset does not include: sludge storage at farm or in field and any related emissions, and emissions of P into groundwater.

## Geography
Dataset modeled according to the Quebec (Canada) context. Resulting uncertainties accounted for via the pedigree matrix.

## Parameters
- Quebec gross domestic product 2011: 3.11e11 USD(2011); name quebecGDP2011; lognormal variance with pedigree 0.0006, pedigree (1,1,1,1,1)
  Quebec Gross domestic product for 2011, expressed in 2011 USD. Source: Institut de la statistique du Québec. Converted from CAD to USD using a yearly average exchange rate of 0.989 CAD/USD (Source: bank of Canada).
- Transformation factor from N2O as N to N2O: 1.57143 dimensionless; name N2O_N_to_N2O; = 44/28
  Mass ratio (N2O/N2O-N)
- ammonia volatilised after sludge application: 0.000209134 kg NH3-N; name NH3_volatilised; = sludge_AmmoniumFracOfN*sludge_N_content*sludge_Dry_mass*(ER_TAN+ c_app)*c_x
  NH3-N = TAN * (er + c_app) * cx Reference: Nemecek, T., Schnetzer, J., 2011. Methods of assessment of direct field emissions for LCIs of agricultural production systems, Data v3.0, Agroscope Reckenholz-Tänikon Research Station ART.
- clay content into soil: 20 % (obsolete); name Clay_content; lognormal variance with pedigree 0.0526, pedigree (3,3,1,5,3)
  Mass fraction of clay content into soil. Source: Michaud, A.R., M. Giroux, I. Beaudin, J. Desjardins, G. Gagné, M. Duchemin, J. Deslandes, C. Landry, P. Beaudet et J. Lagacé. 2009. ODEP; un Outil de diagnostic des exportations de phosphore. Projet« Gestion du risque associé aux facteurs source et transport du phosphore des sols cultivés au Québec », réalisé dans le cadre de l’Initiative d’appui aux conseillers agricoles (PIACA-204). Institut de recherche et de développement en agroenvironnement inc. (IRDA) et Centre de référence en agriculture et agroalimentaire du Québec (CRAAQ), Québec, Canada. Version Octobre 2009 pour ODEP 1.1, 106 p.
- correction factor for application of liquid manure: 0 dimensionless; name c_app
  Correction factor that influences the emission rate; it refers to the amount of manure per application and its degree of dilution; applies only for liquid manure (dimensionless). Source: Nemecek, T., Schnetzer, J., 2011. Methods of assessment of direct field emissions for LCIs of agricultural production systems. Agroscope Reckenholz-Tänikon Research Station ART. 34 pages
- correction factor incorporation time of manure: 0.88 dimensionless; name c_incorp_time; lognormal variance with pedigree 0.0156, pedigree (3,3,1,5,3)
  This parameter represents the time span between manure application and incorporation as described in the Agrammon model in the reference: Nemecek, T., Schnetzer, J., 2011. Methods of assessment of direct field emissions for LCIs of agricultural production systems, Data v3.0, Agroscope Reckenholz-Tänikon Research Station ART.
- correction factor regarding the season of manure application: 0.99 dimensionless; name c_season; lognormal variance with pedigree 0.0846, pedigree (3,3,1,5,1)
  This parameter represents the proportion of manure applied in summer (June-August) and the rest of the year as described in the Agrammon model in the reference Nemecek, T., Schnetzer, J., 2011. Methods of assessment of direct field emissions for LCIs of agricultural production systems, Data v3.0, Agroscope Reckenholz-Tänikon Research Station ART.
- efficiency coefficient of nitrogen in sludge for the first year: 0.251 dimensionless; name EC_N; lognormal variance with pedigree 0.0906, pedigree (4,3,1,5,4)
  This parameter represents the efficiency of nitrogen in sludge to replace nitrogen synthetic fertilisers for the first year. The efficiency of the second year has also to be account for. Reference: Centre de référence en agriculture et agroalimentaire du Québec, 2010. Guide de référence en fertilisation, 2e édition (Reference guide on fertilization). Centre de référence en agriculture et agroalimentaire du Québec, Sainte-Foy, Québec, Canada.
- efficiency coefficient of nitrogen in sludge for the second year: 0.31 dimensionless; name EC_N_2nd_year; lognormal variance with pedigree 0.1306, pedigree (4,3,1,5,4)
  After-effect efficiency coefficient for nitrogen. Value is an average of the 0.12-0.5 range, applicable to all types of crop (Reference: Centre de référence en agriculture et agroalimentaire du Québec, 2010. Guide de référence en fertilisation, 2e édition (Reference guide on fertilization). Centre de référence en agriculture et agroalimentaire du Québec, Sainte-Foy, Québec, Canada.)
- efficiency coefficient of phosphorus in sludge: 0.825 dimensionless; name EC_P; lognormal variance with pedigree 0.1306, pedigree (4,3,1,5,4)
  This parameter represents the efficiency of phosphorus in sludge to replace phosphorus synthetic fertilisers. Reference: Centre de référence en agriculture et agroalimentaire du Québec, 2010. Guide de référence en fertilisation, 2e édition (Reference guide on fertilization). Centre de référence en agriculture et agroalimentaire du Québec, Sainte-Foy, Québec, Canada.
- efficiency coefficient of potassium in sludge: 0.9 dimensionless; name EC_K; lognormal variance with pedigree 0.1306, pedigree (4,3,1,5,4)
  This parameter represents the efficiency of potassium in sludge to replace potassium synthetic fertilisers. Reference: Centre de référence en agriculture et agroalimentaire du Québec, 2010. Guide de référence en fertilisation, 2e édition (Reference guide on fertilization). Centre de référence en agriculture et agroalimentaire du Québec, Sainte-Foy, Québec, Canada.
- efficiency loss factor of phosphorus in sludge: 1.36 dimensionless; name ELF_P; lognormal variance with pedigree 0.1306, pedigree (4,3,1,5,4)
  This parameter represents the efficiency loss of phosphorus in sludge to replace phosphorus synthetic fertilisers with regards to spreading period (if spreading occurs outside the growing crop period the loss factor is above 1, but less than 1,6). Reference: Centre de référence en agriculture et agroalimentaire du Québec, 2010. Guide de référence en fertilisation, 2e édition (Reference guide on fertilization). Centre de référence en agriculture et agroalimentaire du Québec, Sainte-Foy, Québec, Canada.
- efficiency loss factor of potassium in sludge: 1.12 dimensionless; name ELF_K; lognormal variance with pedigree 0.1306, pedigree (4,3,1,5,4)
  This parameter represents the efficiency loss of potassium in sludge to replace potassium synthetic fertilisers with regards to spreading period (if spreading occurs outside the growing crop period the loss factor is above 1, but less than 1,4). Reference: Centre de référence en agriculture et agroalimentaire du Québec, 2010. Guide de référence en fertilisation, 2e édition (Reference guide on fertilization). Centre de référence en agriculture et agroalimentaire du Québec, Sainte-Foy, Québec, Canada.
- emission factor NOx from N2O: 0.21 kg NOx/kg N2O; name EF_NOx_from_N2O; lognormal variance with pedigree 0.0186, pedigree (3,3,1,5,3)
  (kg NOx/kg N2O). Include the direct and indirect NOx emissions from fertilisers and the soil. Nemecek, T., Schnetzer, J., 2011. Methods of assessment of direct field emissions for LCIs of agricultural production systems. Agroscope Reckenholz-Tänikon Research Station ART. 34 pages
- emission factor dinitrogen monoxide as N: 0.0164 kg N2O-N/kg N; name EF_N2O_N; lognormal variance with pedigree 0.0181, pedigree (3,2,1,5,3)
  Emission factor of N2O (direct) from N content in sludge. Source: Rochette, P., Worth, D. E., Lemke, R., McConkey, B. G., Pennock, D.J., Wagner-Riddle, C., Desjardins, R.L. (2008). Estimation of N2O emissions from agricultural soils in Canada. I. Development of a Canadian-specific methodology. Can. J. Soil Sci. 88: 641-654.
- emission factor dinitrogen monoxide from ammonia: 0.01 kg N2O-N/kg NH3-N; name EF_N2O_from_NH3; lognormal variance with pedigree 0.0186, pedigree (3,3,1,5,3)
  (kg N2O-N/kg NH3-N) Indirect N2O emission factor from atmospheric redeposition of N lost by volatilisation in the form of ammonia. Source: IPCC, 2006. IPCC Guidelines for National Greenhouse Gas Inventories, Vol. 4: Agriculture, Forestry and Other Land Use, Chap.11: N2O direct and indirect emissions from managed soils, and CO2 emissions from lime and urea application. Available at: http://www.ipcc.ch/meetings/session25/doc4a4b/vol4.pdf (Accessed 30 October 2013)
- emission factor dinitrogen monoxide from nitrate leaching: 0.0075 kg N2O-N/kg NO3-N; name EF_N2O_from_NO3; lognormal variance with pedigree 0.0186, pedigree (3,3,1,5,3)
  (kg N2O-N/kg NO3-N) Indirect N2O emission factor from nitrate leached and run-off. Source: IPCC, 2006. IPCC Guidelines for National Greenhouse Gas Inventories, Vol. 4: Agriculture, Forestry and Other Land Use, Chap.11: N2O direct and indirect emissions from managed soils, and CO2 emissions from lime and urea application. Available at: http://www.ipcc.ch/meetings/session25/doc4a4b/vol4.pdf (Accessed 30 October 2013)
- emission rate of total ammonium nitrogen: 0.8 kg TAN/kg TAN; name ER_TAN; lognormal variance with pedigree 0.0646, pedigree (3,3,1,5,4)
  Emission rate estimated from solid cattle manure. Reference: Nemecek, T., Schnetzer, J., 2011. Methods of assessment of direct field emissions for LCIs of agricultural production systems. Agroscope Reckenholz-Tänikon Research Station ART.
- equivalence factor CaCO3 eq: 0.1156 dimensionless; name CaCO3_eq; lognormal variance with pedigree 0.0246, pedigree (3,3,1,5,1)
  Personal communication with Marianne Lemieux, a specialized agronomist in pulp and paper sludge stating that 4,5 tons of sludge (50% dry matter content) equals 1 ton of lime (CaCO3). Therefore, a sludge with a 26% dry matter content needs 8,65 tons to substitute 1 ton of lime (CaCO3). Hence 1 ton of sludge substitues 0,1156 ton of lime (CaCO3).
- farmland surface: 5.99471e-5 ha; name farmland_surface; = P2O5_available/P2O5_fertilising_rate
  This is the farmland surface needed to apply sludge on the basis of the limiting nutrient (usually P) for crops. It is calculated with the amount of P in sludge divided by crop fertilisation needs (N, P, K) according to crop distribution that receives pulp and paper sludge in Quebec. Crop fertilization needs are from Beauregard, G. (2013). Production budget of agricultural productions in Quebec. Technical report for CIRAIG. Crop distribution is from personnal communication with Marianne Lemieux(2013) which is a specialized agronomist in pulp and paper sludge transport and spreading in Quebec.
- fraction, process water, to air: 0.15 dimensionless; name fraction_PW_to_air; lognormal variance with pedigree 0.094, pedigree (4,4,3,5,4)
  Literature value. In case when no industry/process specific data are available, default evaporation fraction value is used. This value is 15% and is based on literature (Statistics Canada, 2007 & Shaffer, K.H., 2008, Consumptive water use in the Great Lakes Basin, USGS & Shiklomanov, 2003, World Water Resources at the Beginning of the 21st Century) and has been approved by an expert.
- nitrate leached: 26.9864 kg NO3-N/ha.year; name NitrateLeached; = (21.37+((precipitation+water_irrigation)/(Clay_content+root_depth))*((0.0037*sludge_Dry_mass*sludge_N_content)+(0.0000601*Norg_soil)-(0.00362*Nuptake_plant)))
  This is the total fraction of nitrate (NO3) that leaches to groundwater when organic fertilisers are applied as calculated by the SQCB-NO3 method for the specific farmland surface calculed. Reference: Nemecek, T., Schnetzer, J., 2011. Methods of assessment of direct field emissions for LCIs of agricultural production systems, Data v3.0, Agroscope Reckenholz-Tänikon Research Station ART.
- nitrogen availability for plants: 0.00299626 kg; name N_available; = sludge_N_content*sludge_Dry_mass*(EC_N+((1-EC_N)*EC_N_2nd_year))
  Calculated value of nitrogen available for plants. Efficiency of organic nitrogen has been accounted for.
- nitrogen uptake by plant: 120.3 kg N/ha; name Nuptake_plant; lognormal variance with pedigree 0.0346, pedigree (3,3,1,5,1)
  This value (120,3 kg/ha) represents the N taken by plant during its growth. It has been calculated with the following data. Corn for grain yield: 9,1 t/ha, Soybeans yield: 3 t/ha and tame hay yield : 5,3 t/ha. These yields were calculated based on farmland surface and production according to Statistics Canada (2013) Table 001-0010 - Estimated areas, yield, production and average farm price of principal field crops, in metric units, annual. N uptake by crop according to International Plant Nutrition Institute, 2012. Crop Nutrient Balance - Quebec - Nitrogen. North America-North Eastern section of the IPNI, Available: http://nane.ipni.net/article/NANE-3045
- organic nitrogen into soil: 10788 kg N/ha; name Norg_soil; lognormal variance with pedigree 0.0186, pedigree (3,3,1,5,3)
  N-org is the mass of organic nitrogen contained in the upper 50 cm of soil per ha. Naturally only a fraction of this mass is mineralised and, hence, available for uptake by plants and leaching to the ground water. This fraction is determined by the mineralisation rate, which is 1.6% here and implicitly included in the regression coefficient of the term N-org. N-org is calculated following the model included in Nemecek, T., Schnetzer, J., 2011. Methods of assessment of direct field emissions for LCIs of agricultural production systems, Data v3.0, Agroscope Reckenholz-Tänikon Research Station ART. C-org is 80 t/3000 m3 according to Gasser, M.‐O. M. Bolinder, S. Martel, D. Poulin, I. Beaudin, A.R. Michaud et A. Drouin. 2010. Impacts agroenvironnementaux associés à la culture et au prélèvement de biomasses végétales agricoles pour la production de bioproduits industriels. Rapport final. Institut de recherche et de développement en agroenvironnement. Québec. 197 p.; C/N ratio is 11 and N-org/N tot ratio is 0,89 (Gasser, 2013, personal communication).
- phosphate lost to river per hectare: 1.20083 kg PO4/ha; name PO4_loss_ha; lognormal variance with pedigree 0.0546, pedigree (3,3,1,5,1)
  Quantity of PO4 loss per hectare calculated with the ODEP model. Source: Michaud, A.R., M. Giroux, I. Beaudin, J. Desjardins, G. Gagné, M. Duchemin, J. Deslandes, C. Landry, P. Beaudet et J. Lagacé. 2009. ODEP; un outil de diagnostic des exportations de phosphore. Projet« Gestion du risque associé aux facteurs source et transport du phosphore des sols cultivés au Québec », réalisé dans le cadre de l’Initiative d’appui aux conseillers agricoles (PIACA-204). Institut de recherche et de développement en agroenvironnement inc. (IRDA) et Centre de référence en agriculture et agroalimentaire du Québec (CRAAQ), Québec, Canada. Version Octobre 2009 pour ODEP 1.1, 106 p.
- phosphorus availability for plants: 0.00251778 kg; name P2O5_available; = sludge_P_content*sludge_Dry_mass*EC_P/ELF_P*P_to_P2O5
  Calculated value of P2O5 available for plants. Efficiency of organic phosphorus has been accounted for.
- phosphorus fertilising rate: 42 kg P2O5/ha; name P2O5_fertilising_rate; lognormal variance with pedigree 0.0101, pedigree (3,2,1,5,1)
  This phosphorus fertilising rate (42 kg P2O5/ha) is calculated with the crop distribution receiving pulp and paper sludge in the province of Quebec (corn for grain: 35%, soybean: 25%, tame hay: 40%) based on Marianne Lemieux expert judgement and fertilisation needs for each crop (P2O5 kg/ha) : corn for grain: 50, soybean: 50, tame hay: 30, according to Beauregard, G., 2013. Production budget of agricultural productions in Quebec. Technical report for CIRAIG.
- phosphorus loss to river per hectare: 1.46215 kg P/ha.year; name P_loss_ha; lognormal variance with pedigree 0.0926, pedigree (3,3,1,5,3)
  Quantity of P loss per hectare calculated with the ODEP model. Source: Michaud, A.R., M. Giroux, I. Beaudin, J. Desjardins, G. Gagné, M. Duchemin, J. Deslandes, C. Landry, P. Beaudet et J. Lagacé. 2009. ODEP; un outil de diagnostic des exportations de phosphore. Projet« Gestion du risque associé aux facteurs source et transport du phosphore des sols cultivés au Québec », réalisé dans le cadre de l’Initiative d’appui aux conseillers agricoles (PIACA-204). Institut de recherche et de développement en agroenvironnement inc. (IRDA) et Centre de référence en agriculture et agroalimentaire du Québec (CRAAQ), Québec, Canada. Version Octobre 2009 pour ODEP 1.1, 106 p.
- potassium availability for plants: 0.000805714 kg; name K2O_available; = sludge_K_content*sludge_Dry_mass*EC_K/ELF_K*K_to_K2O
  Calculated value of K2O available for plants. Efficiency of organic potassium has been accounted for.
- precipitation, annual: 554 mm/year; name precipitation; lognormal variance with pedigree 0.0526, pedigree (3,3,1,5,3)
  Quantity of precipitation over the period of sludge application. Source: Little, S. J., Beauchemin, K., Janzen, H., Kroebel, R., Maclean, K., 2013. Holos: A tool to estimate and reduce greenhouse gases from farms – Methodology & algorithms for version 2.0. Agriculture and Agri-Food Canada, 113 pp.
- rooting depth: 1 m; name root_depth; lognormal variance with pedigree 0.0132, pedigree (3,3,1,5,3)
  Plant rooting depth roughly estimated from soybeans and corn for grain based on Roundtable on sustainable biofuels, 2011, RSB GHG Calculation methodology, RSB International Standard, Available at: http://rsb.org/pdfs/12-12-20-RSB-STD-01-003-01-RSB-GHG-Calculation-Methodology-v2-1.pdf (Accessed 3 October 2013)
- total correction factor for manure application: 0.8712 dimensionless; name c_x; = c_incorp_time* c_season
  This parameter represents the sum of all correction factors regarding application of manure as described in the Agrammon model in Nemecek, T., Schnetzer, J., 2011. Methods of assessment of direct field emissions for LCIs of agricultural production systems. Agroscope Reckenholz-Tänikon Research Station ART. 34 pages
- transformation factor NO3 to NO3_N: 0.225806 dimensionless; name NO3_to_NO3_N; = 14/62
  Mass ratio (NO3-N/NO3)
- transformation factor P to PO4: 3.06452 dimensionless; name P_to_PO4; = 95/31
  Mass ratio (PO4/P)
- transformation factor from K to K2O: 1.20513 dimensionless; name K_to_K2O; = 94/78
  Mass ratio (K2O/K20-K)
- transformation factor from NH3 to NH3-N: 0.823529 dimensionless; name NH3_to_NH3_N; = 14/17
  Mass ratio (NH3-N/NH3)
- transformation factor from NH3-N to NH3: 1.21429 dimensionless; name NH3_N_to_NH3; = 17/14
  Mass ratio (NH3/NH3-N)
- transformation factor from NO3 as N to NO3: 4.42857 dimensionless; name NO3_N_to_N03; = 62/14; lognormal variance with pedigree 0.21, pedigree (5,5,5,5,5)
  Mass ratio (NO3/NO3-N)
- transformation factor from P to P2O5: 2.29032 dimensionless; name P_to_P2O5; = 142/62
  Mass ratio (P2O5/P2O5-P)
- water irrigation: 0 mm/year; name water_irrigation
  Water meant for irrigation of crop
- world gross domestic product 2011: 7e13 USD(2011); name worldGDP2011; lognormal variance with pedigree 0.0006, pedigree (1,1,1,1,1)
  World Gross domestic product for 2011, expressed in 2011 USD. Source: World Bank.

## Reference product
- organo-mineral phosphorus fertiliser, as P2O5: 1 kg; name P2O5_fertiliser; = sludge_P_content*sludge_Dry_mass*P_to_P2O5; By-product classification allocatable product; CPC 34659: Fertilizers n.e.c.
  This is the total phosphate (as P2O5) output (organic and mineral forms of phosphate contained) from organic origin. In practice, only a part of this total amount is available to the plants and the available amount has to be calculated considering efficiency of organic phosphate (to replace mineral phosphate), which also depends on many factors, such as climate, soil, crop, timing and technique of application, etc. For information purposes, the amount considering efficiency of organic phosphate is estimated in the parameter section of this dataset under "phosphorus availability for plants". Since this dataset includes field emissions from the application of sludge, phosphate availability has been accounted for in the calculation of direct field emissions.
  production volume 2.24892e8 kg
    Calculated from production volume of reference product using the relative outputs.
  property carbon content, fossil 0
    Carbon content, fossil is calculated based on the chemical formula of the substance.
  property oxygen content 0.563579
    Oxygen content (on a dry matter basis) of organo-mineral phosphorus fertiliser, as P2O5 is calculated from the molecular formula of the substance (Phosphorus).
  property phosphorus content 0.436421
    Phosphorus content (on a dry matter basis) of organo-mineral phosphorus fertiliser, as P2O5 is calculated from the molecular formula of the substance (Phosphorus).
  property price 0.241 EUR2005
    Set equal to the price of the corresponding inorganic fertiliser
  properties: carbon allocation 0 kg, carbon content 0, carbon content, non-fossil 0, dry mass 1 kg, water content 0, water in wet mass 0 kg, wet mass 1 kg

## Inputs from technosphere
- acrylic dispersion, with water, in 58% solution state: 2.08694e-5 kg
- acrylic varnish, with water, in 53% solution state: 6.85709e-6 kg
- aluminium scrap, post-consumer: -0.000436679 kg
- aluminium, wrought alloy: 0.000436679 kg
- chemical, inorganic: 6.55678e-7 kg
- chemical, organic: 6.55678e-7 kg
- chimney: 1.66806e-9 m
- copper scrap, sorted, pressed: -3.94904e-5 kg
- copper, cathode: 4.38782e-5 kg
- corrugated board box: 0.00046058, 0.00106905, 1.71567e-5 kg (3 suppliers, which the file names only by identifier); sum of these 0.00154679 kg
- diesel, low-sulfur: 1.32661e-9, 3.19719e-8, 1.66192e-8, 6.0081e-10, 8.88222e-11, 2.67758e-9, 1.33924e-9 kg (7 suppliers, which the file names only by identifier); sum of these 5.46241e-8 kg
- electricity, low voltage: 0.000356915, 0.000707322, 0.00679458, 0.000121205, 0.00242836, 2.20417e-5, 0.00168324, 0.000495673 kWh (8 suppliers, which the file names only by identifier); sum of these 0.0126093 kWh
- electricity, medium voltage: 2.54417e-5, 7.93862e-6, 0.000340203, 2.36412e-7, 1.20627e-6, 7.28375e-5, 3.98411e-6 kWh (7 suppliers, which the file names only by identifier); sum of these 0.000451847 kWh
- ethylene glycol monoethyl ether: 9.18956e-6 kg
- ethylene vinyl acetate copolymer: 3.6229e-6, 1.58426e-6 kg (2 suppliers, which the file names only by identifier); sum of these 5.20716e-6 kg
- extrusion, plastic film: 3.08179e-5 kg
- hazardous waste, for incineration: -3.04094e-6, -1.2959e-6, -3.3874e-8 kg (3 suppliers, which the file names only by identifier); sum of these -4.37071e-6 kg
- heat, district or industrial, natural gas: 0.000199955, 0.00738455, 0.0199958, 0.000328583 MJ (4 suppliers, which the file names only by identifier); sum of these 0.0279089 MJ
- heavy fuel oil: 4.13803e-7, 3.48197e-9, 1.77017e-8, 2.29529e-8, 4.46685e-9, 5.97955e-9, 2.04821e-7 kg (7 suppliers, which the file names only by identifier); sum of these 6.73207e-7 kg
- industrial furnace, 1MW, oil: 1.25106e-10 unit
- industrial furnace, natural gas: 6.9657e-10 unit
- industrial machine, heavy, unspecified: 3.82314e-6 kg
- isopropanol: 3.82314e-5 kg
- kraft paper: 0.00070166, 0.000325363 kg (2 suppliers, which the file names only by identifier); sum of these 0.00102702 kg
- lead: 7.74322e-5 kg
- light fuel oil: 2.13788e-7, 2.12201e-8, 2.04035e-9, 1.09536e-7, 1.51631e-9, 1.40814e-9, 1.05142e-8 kg (7 suppliers, which the file names only by identifier); sum of these 3.60022e-7 kg
- maintenance, transmission network, electricity, high voltage direct current subsea cable: 1.24389e-7 km*year
- maize starch: 9.67307e-6 kg
- municipal solid waste: -5.68967e-8, -1.76365e-5, -2.04878e-8, -4.02396e-5, -1.43365e-8 kg (5 suppliers, which the file names only by identifier); sum of these -5.79678e-5 kg
- natural gas, high pressure: 3.65693e-8, 1.5436e-8, 8.84063e-8, 2.62356e-8, 1.48417e-6, 1.51694e-7, 1.65586e-8, 4.88622e-10, 5.87972e-8, 6.17441e-8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 m3 (26 suppliers, which the file names only by identifier); sum of these 6.37884e-6 m3
- oil storage, 3000l: 1.5638e-9 unit
- packaging box factory: 1.51812e-12 unit
- packaging film, low density polyethylene: 2.55045e-5 kg
- paper, woodfree, coated: 0.0243769 kg
- polyethylene, high density, granulate: 3.08179e-5 kg
- polypropylene, granulate: 1.01066e-5 kg
- potato starch: 6.65665e-6 kg
- printing ink, offset, without solvent, in 47.5% solution state: 3.52417e-6, 0.00017063 kg (2 suppliers, which the file names only by identifier); sum of these 0.000174154 kg
- scrap copper: -1.96641e-7, -4.19118e-6 kg (2 suppliers, which the file names only by identifier); sum of these -4.38782e-6 kg
- scrap steel: -1.38509e-8, -1.09324e-5 kg (2 suppliers, which the file names only by identifier); sum of these -1.09462e-5 kg
- sheet rolling, aluminium: 0.000436679 kg
- spent solvent mixture: -1.89152e-5, -7.39082e-6 kg (2 suppliers, which the file names only by identifier); sum of these -2.6306e-5 kg
- steel, low-alloyed: 0.000109462 kg
- synthetic rubber: 3.13918e-6 kg
- textile, woven cotton: 4.94553e-6 kg
- thermoforming, with calendering: 6.97986e-6 kg
- waste emulsion paint: -4.5195e-6, -4.26027e-7 kg (2 suppliers, which the file names only by identifier); sum of these -4.94553e-6 kg
- waste paper, unsorted: -1.12386e-5, -0.0034288, -0.00343102 kg (3 suppliers, which the file names only by identifier); sum of these -0.00687105 kg
- waste paperboard, unsorted: -0.000773396, -0.000773396 kg (2 suppliers, which the file names only by identifier); sum of these -0.00154679 kg
- waste plastic, mixture: -1.63158e-7, -8.24469e-10, -1.81906e-9, -5.80581e-7, -1.1422e-6, -1.09016e-8, -4.27578e-9, -4.50275e-9 kg (8 suppliers, which the file names only by identifier); sum of these -1.90826e-6 kg
- waste wire plastic: -1.01066e-5 kg
- white spirit: 5.34888e-5 kg
- wire drawing, copper: 4.38782e-5 kg
- zinc coat, coils: 1.757e-6 m2

## Inputs from nature
- Occupation, seabed, infrastructure [natural resource, land]: 1.36828e-5 m2*year
- Transformation, from seabed, unspecified [natural resource, land]: 3.4207e-7 m2
- Transformation, to seabed, infrastructure [natural resource, land]: 3.4207e-7 m2
- Water, unspecified natural origin [natural resource, in water]: 7.73636e-7 m3

## Emissions to nature
- 2-Propanol [air, urban air close to ground]: 3.82314e-5 kg
- Acetaldehyde [air, urban air close to ground]: 4.34869e-12 kg
- Acetic acid [air, urban air close to ground]: 5.37159e-11 kg
- Acetone [air, urban air close to ground]: 4.09992e-12 kg
- Ammonia [air, urban air close to ground]: 2.92905e-12 kg
- Arsenic ion [air, urban air close to ground]: 3.55326e-13 kg
- Benzene [air, urban air close to ground]: 9.97755e-11 kg
- Benzene, ethyl- [air, urban air close to ground]: 1.69937e-6 kg
- Benzo(a)pyrene [air, urban air close to ground]: 3.7488e-15 kg
- Butane [air, urban air close to ground]: 1.79719e-10 kg
- Calcium [air, urban air close to ground]: 3.00661e-12 kg
- Carbon dioxide, fossil [air, urban air close to ground]: 1.74008e-5 kg
- Carbon monoxide, fossil [air, urban air close to ground]: 7.84576e-10 kg
- Chromium III [air, urban air close to ground]: 1.35297e-13 kg
- Chromium VI [air, urban air close to ground]: 1.36664e-15 kg
- Cobalt II [air, urban air close to ground]: 9.01982e-13 kg
- Copper ion [air, urban air close to ground]: 1.28307e-11 kg
- Dinitrogen monoxide [air, urban air close to ground]: 5.73666e-11 kg
- Dioxins, measured as 2,3,7,8-tetrachlorodibenzo-p-dioxin [air, urban air close to ground]: 2.77302e-20 kg
- Ethanol [air, urban air close to ground]: 8.19984e-12 kg
- Formaldehyde [air, urban air close to ground]: 5.31116e-11 kg
- Heptane [air, urban air close to ground]: 1.66254e-5 kg
- Hydrocarbons, aliphatic, alkanes, unspecified [air, urban air close to ground]: 2.4898e-11 kg
- Hydrocarbons, aliphatic, unsaturated [air, urban air close to ground]: 8.19984e-13 kg
- Hydrocarbons, aromatic [air, urban air close to ground]: 4.63331e-12 kg
- Hydrochloric acid [air, urban air close to ground]: 4.10235e-11 kg
- Hydrogen fluoride [air, urban air close to ground]: 1.47132e-12 kg
- Iron ion [air, urban air close to ground]: 2.24129e-11 kg
- Lead II [air, urban air close to ground]: 3.96326e-12 kg
- Mercury II [air, urban air close to ground]: 2.04156e-14 kg
- Methane, fossil [air, urban air close to ground]: 5.97253e-10 kg
- Methanol [air, urban air close to ground]: 1.75375e-6 kg
- Molybdenum VI [air, urban air close to ground]: 2.18663e-13 kg
- Nickel II [air, urban air close to ground]: 1.3393e-11 kg
- Nitrogen oxides [air, urban air close to ground]: 8.07159e-9 kg
- PAH, polycyclic aromatic hydrocarbons [air, urban air close to ground]: 2.51387e-12 kg
- Particulate Matter, < 2.5 um [air, urban air close to ground]: 2.81121e-10 kg
- Particulate Matter, > 10 um [air, urban air close to ground]: 6.55987e-11 kg
- Particulate Matter, > 2.5 um and < 10um [air, urban air close to ground]: 3.27994e-11 kg
- Pentane [air, urban air close to ground]: 3.02248e-10 kg
- Propane [air, urban air close to ground]: 5.09308e-11 kg
- Propionic acid [air, urban air close to ground]: 4.9755e-12 kg
- Propylene oxide [air, urban air close to ground]: 3.19179e-6 kg
- Selenium IV [air, urban air close to ground]: 3.27994e-13 kg
- Sodium [air, urban air close to ground]: 2.04996e-11 kg
- Sulfur dioxide [air, urban air close to ground]: 1.17352e-8 kg
- Toluene [air, urban air close to ground]: 1.50125e-6 kg
- Vanadium V [air, urban air close to ground]: 2.73328e-11 kg
- Water [air, non-urban air or from high stacks]: 4.61206e-7 m3
- Xylene [air, urban air close to ground]: 1.5012e-6 kg
- Zinc II [air, urban air close to ground]: 1.38966e-11 kg
- BOD5, Biological Oxygen Demand [water, surface water]: 5.44968e-9 kg
- COD, Chemical Oxygen Demand [water, unspecified]: 4.36764e-7 kg
- DOC, Dissolved Organic Carbon [water, unspecified]: 1.61765e-7 kg
- TOC, Total Organic Carbon [water, unspecified]: 1.61765e-7 kg
- Water [water, unspecified]: 3.1243e-7 m3

## Sampling procedure
Data mainly originate from acknowledged model, scientific literature, government publications and handbook. Some specific data come from expert judgement and a pulp mill. See sources.

## Extrapolations
The Quebec dataset has been extrapolated to the GLO geography. Data quality indicators have been adjusted accordingly.

Calculations of N2O emissions are based on the IPCC method. The indirect emission factors are taken from IPCC and the direct emission factors are canadian-specific. Calculations of NOx emissions are based on an expert judment and considered to be fit for the Quebec context. Calculations of NH3 and NO3 emissions are based on Swiss models used with parameters from the Quebec context. Calculations of P and PO4 emissions are from a Quebec-specific model. Since models are usually based on solid animal manure, solid pulp and paper sludge are deemed to be an equivalent organic fertiliser.
