# ceramic factory construction

Dataset: EcoSpold 2, unit process
Geography: RoW
Time period: 2001-01-01 to 2022-12-31
Technology level: current
Classification: ISIC rev.4 ecoinvent: 4290:Construction of other civil engineering projects
Classification: EcoSpold01Categories: construction materials/others
Tags: ConvertedDataset
Scenario: Business-as-Usual
System model: Allocation at the point of substitution
Generated by: Hans-Jörg Althaus
Published in: Kellenberger D. 2007
Database: ecoinvent
isCopyrightProtected: true

## General comment
Life time of 50 years for buildings and of 25 years for machines is assumed. Dataset refers to a factory with yearly output of 5'000 t of ceramic products.
[This dataset was already contained in the ecoinvent database version 2. It was not individually updated during the transfer to ecoinvent version 3. Life Cycle Impact Assessment results may still have changed, as they are affected by changes in the supply chain, i.e. in other datasets. This dataset was generated following the ecoinvent quality guidelines for version 2. It may have been subject to central changes described in the ecoinvent version 3 change report (http://www.ecoinvent.org/database/ecoinvent-version-3/reports-of-changes/), and the results of the central updates were reviewed extensively. The changes added e.g. consistent water flows and other information throughout the database. The documentation of this dataset can be found in the ecoinvent reports of version 2, which are still available via the ecoinvent website. The change report linked above covers all central changes that were made during the conversion process.]

## Included activities end
Includes land use and materials used in buildings and machinery as well as their disposal

## Geography
data from two factories of one producer in Austria

## Technology
large scale production plant in Europe.

## Reference product
- ceramic factory: 1 unit; By-product classification allocatable product; CPC 53269: Other constructions for manufacturing
  EcoSpold01Location=CH
  production volume 3.96633 unit
    This is a placeholder value that does not reflect real-world production volumes. This dataset does not currently require a real-world production volume to work in the database framework, and no actual data were collected yet. This has no negative effect on the results of the ecoinvent database.
  property price 7.077e6 EUR2005
    Calculated based on inputs: The price of the product has been calculated as a sum of the values of the material and energy inputs for this product. This value is therefore a rough estimation. It may underestimate the real price since there are additional expenses when producing any product. These expences can include for example labour costs, treatment of waste materials and profit for the producer. Please consider carefully whether this level of data quality is acceptable for your application.
  properties: carbon allocation 0 kg, carbon content 0

## Inputs from technosphere
- building, hall: 29500 m2; lognormal variance with pedigree 0.3446, pedigree (3,3,5,5,1)
  EcoSpold01Location=CH
- building, multi-storey: 26300 m3; lognormal variance with pedigree 0.3446, pedigree (3,3,5,5,1)
  EcoSpold01Location=RER
- industrial machine, heavy, unspecified: 168000 kg; lognormal variance with pedigree 0.5, pedigree (5,5,5,5,5)
  EcoSpold01Location=RER

## Inputs from nature
- Occupation, industrial area [natural resource, land]: 3.44e6 m2*year; lognormal variance with pedigree 0.0846, pedigree (3,3,5,5,1)
- Occupation, traffic area, road network [natural resource, land]: 410000 m2*year; lognormal variance with pedigree 0.0846, pedigree (3,3,5,5,1)
- Transformation, from unspecified [natural resource, land]: 76900 m2; lognormal variance with pedigree 0.1626, pedigree (1,3,5,5,1)
- Transformation, to industrial area [natural resource, land]: 68700 m2; lognormal variance with pedigree 0.1646, pedigree (3,3,5,5,1)
- Transformation, to traffic area, road network [natural resource, land]: 8200 m2; lognormal variance with pedigree 0.1646, pedigree (3,3,5,5,1)

## Sampling procedure
environmental report

## Extrapolations
see Geography This dataset has been copied from an original dataset covering the geography CH. The uncertainty has been adjusted accordingly.

## Review by Roberto Dones 2003-07-04
Passed
