# power sawing, with catalytic converter

Dataset: EcoSpold 2, unit process
Geography: RER
Time period: 1993-01-01 to 2022-12-31
Technology level: outdated
Classification: ISIC rev.4 ecoinvent: 1610:Sawmilling and planing of wood
Synonyms: Kettensäge; chain; motor
Tags: ConvertedDataset; Swiss brush-up completed
Scenario: Business-as-Usual
System model: Allocation at the point of substitution
Generated by: Frank Werner
Published in: Kellenberger D. 2007
Database: ecoinvent
isCopyrightProtected: true

## General comment
All measured emissions are taken from an old (1993) EMPA report. The type of power saw probably does not correspond to the type described in the infrastructure, but this discrepancy can be accepted. This module should not be used if its relative high importance would be high in a certain environmental inventory.
[This dataset was already contained in the ecoinvent database version 2. It was not individually updated during the transfer to ecoinvent version 3. Life Cycle Impact Assessment results may still have changed, as they are affected by changes in the supply chain, i.e. in other datasets. This dataset was generated following the ecoinvent quality guidelines for version 2. It may have been subject to central changes described in the ecoinvent version 3 change report (http://www.ecoinvent.org/database/ecoinvent-version-3/reports-of-changes/), and the results of the central updates were reviewed extensively. The changes added e.g. consistent water flows and other information throughout the database. The documentation of this dataset can be found in the ecoinvent reports of version 2, which are still available via the ecoinvent website. The change report linked above covers all central changes that were made during the conversion process.]

## Included activities end
Includes the Inputs: power saw (infrastructure), fuel use, lubricating oil requirements, and some measured air emissions (including emissions from combustion of the fuel). The saw is equipped with a catalytic converter.

## Geography
The type of machine whose air emissions were measured is unknown. Certain elementary flows or intermediate product flows are extrapolated from other geographical areas than indicated.

## Technology
The module represents an example for an average technology used in Europe in the late 1990s

## Reference product
- power sawing, with catalytic converter: 1 hour; By-product classification allocatable product; CPC 88311: Wood manufacturing services
  production volume 1.32237 hour
    This is a placeholder value that does not reflect real-world production volumes. This dataset does not currently require a real-world production volume to work in the database framework, and no actual data were collected yet. This has no negative effect on the results of the ecoinvent database. The placeholder value of this activity was scaled according to the nominal GDP of 2005 (source: United Nations, http://data.un.org/Glossary.aspx?q=GDP+%28current+US%24%29, accessed 20130726) to reflect an appropriate share of the global production volume, which is also a placeholder value.
  property price 1.5631 EUR2005
    Calculated based on inputs: The price of the product has been calculated as a sum of the values of the material and energy inputs for this product. This value is therefore a rough estimation. It may underestimate the real price since there are additional expenses when producing any product. These expences can include for example labour costs, treatment of waste materials and profit for the producer. Please consider carefully whether this level of data quality is acceptable for your application.
  properties: carbon allocation 0 kg, carbon content 0

## Inputs from technosphere
- petrol, two-stroke blend: 1.25 kg; lognormal variance with pedigree 0.0731, pedigree (1,5,5,3,1)
  properties: UVEK_link_1 3428, UVEK_relative_amount_1 1, carbon content, fossil 0.865, dry mass 1 kg, heating value, net 43.2 MJ, wet mass 1 kg
  note on UVEK_link_1: to be used only in special submissions in coordination with ecoinvent and the Swiss FOEN
  note on heating value, net: Assumed equal to "petroleum". LHV for petroleum: Based on literature, page 7, Report6, part 4
- power saw, with catalytic converter: 0.0004 unit; lognormal variance with pedigree 0.0731, pedigree (1,5,5,3,1)
- rape oil, crude: 0.54 kg; lognormal variance with pedigree 0.1211, pedigree (5,5,5,3,3)
  properties: UVEK_link_1 3739, UVEK_relative_amount_1 1, carbon content, non-fossil 0.776, dry mass 1 kg, heating value, net 23.51 MJ, wet mass 1 kg
- steel, chromium steel 18/8, hot rolled: 0.0122 kg; lognormal variance with pedigree 0.0731, pedigree (1,5,5,3,1)
  properties: UVEK_link_1 451, UVEK_link_2 2662, UVEK_relative_amount_1 1, UVEK_relative_amount_2 1, carbon content, fossil 0.0008, dry mass 1 kg, wet mass 1 kg
  note on carbon content, fossil: Stainless steel model is the grade 304 steel (18/8 stainless, 18% chromium 8% nickel; max. 0.08% C)

## Emissions to nature
- Carbon dioxide, fossil [air, non-urban air or from high stacks]: 3.47 kg; lognormal variance with pedigree 0.0731, pedigree (1,5,5,3,1)
- Carbon monoxide, fossil [air, non-urban air or from high stacks]: 0.16 kg; lognormal variance with pedigree 0.2481, pedigree (1,5,5,3,1)
- Lead II [air, non-urban air or from high stacks]: 8.74e-5 kg; lognormal variance with pedigree 0.8481, pedigree (1,5,5,3,1)
- Methane, fossil [air, non-urban air or from high stacks]: 0.0016 kg; lognormal variance with pedigree 0.2481, pedigree (1,5,5,3,1)
- NMVOC, non-methane volatile organic compounds [air, non-urban air or from high stacks]: 0.0784 kg; name nmvoc; lognormal variance with pedigree 0.2481, pedigree (1,5,5,3,1)
- Nitrogen oxides [air, non-urban air or from high stacks]: 0.018 kg; lognormal variance with pedigree 0.2481, pedigree (1,5,5,3,1)
- Sulfur dioxide [air, non-urban air or from high stacks]: 0.000806 kg; lognormal variance with pedigree 0.0731, pedigree (1,5,5,3,1)
- Oils, non-fossil [soil, forestry]: 0.054 kg; lognormal variance with pedigree 0.2481, pedigree (1,5,5,3,1)

## Sampling procedure
most data from one technical report

## Extrapolations
See geography
