# clay pit construction

Dataset: EcoSpold 2, unit process
Geography: CH
Time period: 1992-01-01 to 2022-12-31
Technology level: current
Classification: EcoSpold01Categories: construction materials/additives
Classification: ISIC rev.4 ecoinvent: 4290:Construction of other civil engineering projects
Tags: ConvertedDataset
Scenario: Business-as-Usual
System model: Allocation at the point of substitution
Generated by: Daniel Kellenberger (obsolete)
Published in: Kellenberger D. 2007
Database: ecoinvent
isCopyrightProtected: true

## General comment
This dataset represents the construction of 1 clay pit infrastructure. Data was based on an evaluation of an operating plant with an excavated amount of 100.000t/year. It is assumed that the size and volume of the buildings, the weight of the production machines and the land-use (build part, not mine) depending on the production volume is about the same all over Western Europe.
This dataset is applied to a plant with a total produced amount per unit (50 years) of 4,000,000,000 kg (yearly production = 80,000,000 kg).
Data are estimated based on an air-picture and sketches of the process. The avarage yearly production volume is about 100'000 t, Total land occupation: 40'000m; about 20'000m2 buildings (1'000m2 multi storey and 19'000m2 hall), 15'000m2 paved roads, 5'000m2 vegetation. Assumed weight of machines: 2'000t and service life of 25 years.

## Included activities start
From unoccupied land foreseen for a clay pit. Includes the area of the "build" infrastructure (buildings, roads, etc.) used for brick and roof tile production.

## Included activities end
This activity ends with the constructed buildings and machineries for a clay pit. This dataset doesn't include the land-use of the mining activities.

## Geography
Data was obtained from Swiss industries.

## Technology
The data of the infrastructure corresponds to the high level of technology.

## Reference product
- clay pit infrastructure: 1 unit; By-product classification allocatable product; CPC 53269: Other constructions for manufacturing
  EcoSpold01Location=CH
  This dataset is applied to a plant with a total produced amount per unit (50 years) of 4,000,000,000 kg (yearly production = 80,000,000 kg).
  production volume 0.0336675 unit
    This is a placeholder value that does not reflect real-world production volumes. This dataset does not currently require a real-world production volume to work in the database framework, and no actual data were collected yet. This has no negative effect on the results of the ecoinvent database. The placeholder value of this activity was scaled according to the nominal GDP of 2005 (source: United Nations, http://data.un.org/Glossary.aspx?q=GDP+%28current+US%24%29, accessed 20130726) to reflect an appropriate share of the global production volume, which is also a placeholder value.
  property capacity [kg] 8e7 kg; name capacity_kg
    This dataset is applied to a plant with a total produced amount per unit (50 years) of 4,000,000,000 kg (yearly production = 80,000,000 kg).
  property lifetime 50 year; name lifetime_yr
    (same comment as for clay pit infrastructure)
  property lifetime capacity [kg] 4e9 kg; name lifetimecapacity_kg; = capacity_kg*lifetime_yr
    (same comment as for clay pit infrastructure)
  property price 5.40403e6 EUR2005
    Calculated based on inputs: The price of the product has been calculated as a sum of the values of the material and energy inputs for this product. This value is therefore a rough estimation. It may underestimate the real price since there are additional expenses when producing any product. These expences can include for example labour costs, treatment of waste materials and profit for the producer. Please consider carefully whether this level of data quality is acceptable for your application.
  properties: carbon allocation 0 kg, carbon content 0

## Inputs from technosphere
- building, hall, steel construction: 19000 m2; lognormal variance with pedigree 0.436, pedigree (5,5,5,1,3)
  EcoSpold01Location=CH
  Estimation, based on a visit and an air photo of brickworks Gasser in Rapperswil BE. 95% of the roof area was assumed as buildings hall, i.e. 19,000 m2 of surface.
- building, multi-storey: 6000 m3; lognormal variance with pedigree 0.428, pedigree (5,5,5,1,1)
  EcoSpold01Location=RER
  Estimation, based on a visit and an air photo of brickworks Gasser in Rapperswil BE. 5% of the roof area was assumed as multi-storage buildings, i.e. 1,000 m2 of surface. An average height of 6 m was assumed.
- industrial machine, heavy, unspecified: 4e6 kg; lognormal variance with pedigree 0.428, pedigree (5,5,5,1,1)
  EcoSpold01Location=RER
  Estimation, based on a visit and an air photo of brickworks Gasser in Rapperswil BE. The required amount of infraestructure referring to the machines is based on the assumption that the total mass of all machines used for the production (including burning kiln, excluding the lining with refractory bricks) come to about 2,000 tons. The service life is assumed to be about 25 years.
  properties: lifetime 25 year, weight 2e6 kg
  note on lifetime: Assumed weight of machines: 2'000t and service life of 25 years.

## Inputs from nature
- Occupation, industrial area [natural resource, land]: 2e6 m2*year; lognormal variance with pedigree 0.158, pedigree (5,5,5,1,1)
  Estimation, based on a visit and an air photo of brickworks Gasser in Rapperswil BE. The total land occupation considered was 40,000 m2 and a time occupation of 50 years was assumed.
- Transformation, from unspecified [natural resource, land]: 40000 m2; lognormal variance with pedigree 0.248, pedigree (5,5,5,1,1)
  Estimation, based on a visit and an air photo of brickworks Gasser in Rapperswil BE. This data included the total area with a former use of land unknown.
- Transformation, to industrial area [natural resource, land]: 25000 m2; lognormal variance with pedigree 0.248, pedigree (5,5,5,1,1)
  Estimation, based on a visit and an air photo of brickworks Gasser in Rapperswil BE. A total amount of 25,000 m2 were assumed as transformed to industrial area. This included the built up area (20,000 m2) and the green area (5,000 m2).
- Transformation, to traffic area, road network [natural resource, land]: 15000 m2; lognormal variance with pedigree 0.248, pedigree (5,5,5,1,1)
  Estimation, based on a visit and an air photo of brickworks Gasser in Rapperswil BE. The total area with roads (15,000 m2) was assumed as a transformed to traffic area.

## Sampling procedure
The estimation of land use and infrastructure relates to one company in Switzerland (Ziegelei Gasser AG in Rapperswil BE, with an excavated amount of 80.000t/y).

## Review by Roberto Dones 2003-07-04
Passed

## Review by Roland Hischier 2011-09-22
Transfer of documentation done.
