# treatment of sewage sludge, 75% water, WWT[R], WW from anaerobic digestion of whey, sanitary landfill

Dataset: EcoSpold 2, unit process
Geography: GLO
Time period: 1994-01-01 to 2022-12-31
Technology level: current
Classification: ISIC rev.4 ecoinvent: 3821:Treatment and disposal of non-hazardous waste
Scenario: Business-as-Usual
System model: Allocation at the point of substitution
Generated by: Nikolia Stoikou
Database: ecoinvent
isCopyrightProtected: true

## General comment
The process represents the treatment of a waste (sewage sludge) that is exclusively generated from another waste treatment. Sewage sludge is generated in the wastewater treatment of 'wastewater from anaerobic digestion of whey'. Recommended use of this dataset: to be used within the specific chain of treatments for 'wastewater from anaerobic digestion of whey'. Share of biogenic carbon in the sludge: 98.32%. Landfill gas capture and utilisation generates 0.04742 kWh of electricity and 0.08552 MJ of useful heat. 0.002598 kg waste mass remains in the landfill even after the long term period.

## Included activities start
The activity starts with the waste being available at the gate of the treatment facility. Collection and transportation of the waste to the treatment plant is not included.

## Included activities end
The activity ends with the waste being treated and waste-specific emissions from the landfill are released to the environment (air due to landfil gas and water due to landfil leachate).

## Geography
Landfill site with mean annual temperature (MAT) of 16.743579766537 degC, mean annual precipitation (MAP) of 1250.84108527132 mm/year, and net infiltration of 790.252035689178 mm/year.The leachate percolating through the landfill has an average residence time of 6.33 years.
References: UN data, 2020. Precipitation, Environment Statistics Database, United Nations Statistics Division Available at: http://data.un.org/Data.aspx?q=precipitation&d=ENV&f=variableID%3a6;
World Bank, 2022. Surface area (sq.km), World Bank Group Available at: https://data.worldbank.org/indicator/AG.SRF.TOTL.K2;
Doka G.,2021. A model for composition-specific life cycle inventories of regionalised wastewater fates, Zurich, Switzerland. http://www.doka.ch/publications.htm

## Technology
Sanitary (controlled) landfill for municipal solid waste. Ultimate average landfill height is 20 meters. Operation phase duration is 30 years. The total raw landfill gas mass produced in the landfill from this waste is 0.1307 kg. The total CH4 mass in the raw landfill gas is 0.06049 kg. Percentage of landfill gas directly emitted is 47w%. Percentage of landfill gas captured and flared is 18.02w%. Percentage of landfill gas captured and utilised is 34.98%. Conversion efficiencies are 27.8e% for electricity and 13.5e% for useful heat. Leachate generated during the first 100 years is collected and treated region-specifically before emission. Based on average waste composition and climate data the end of carbonate phase is estimated to be reached 2'863 years after waste deposition.

## Reference product
- heat, district or industrial, other than natural gas: 1 MJ; By-product classification allocatable product; CPC 17300: Steam and hot water
  Net production of heat from landfill gas utilisation.
  production volume 2.69189e7 MJ
    Calculated from the production volume of the reference product in proportion to the respective output amounts.
  property price 0.0106 EUR2005
    Average European district heat price from Ecoheatcool and Euroheat 2005-2006, Ecoheat Work package 1: The European heat market. Final report. 10.6 EUR/GJ i s the price of district heat. http://www.solarthermalworld.org/files/Ecoheatcool%20WP1%20Web.pdf?download
  properties: carbon allocation 0 kg, carbon content 0, carbon content, fossil 0, carbon content, non-fossil 0, dry mass 1 kg, heating value, net 1 MJ, water content 0, water in wet mass 0 kg, wet mass 1 kg

## Inputs from technosphere
- aluminium scrap, post-consumer, prepared for melting: -7.72611e-6 kg
- aluminium, cast alloy: 7.72611e-6 kg
- chemical, inorganic: 5.02811e-6 kg
- chemical, organic: 4.01022e-5 kg
- concrete, 25MPa: 1.68296e-8, 6.4707e-6, 7.85958e-9, 2.66095e-7, 2.61852e-7 m3 (5 suppliers, which the file names only by identifier); sum of these 7.02334e-6 m3
- copper scrap, sorted, pressed: -9.32039e-6 kg
- copper, cathode: 9.32039e-6 kg
- electricity, medium voltage: 0.0584559, 0.0182401, 0.00054319, 0.00277158, 0.0398234, 0.167355, 0.0124057, 0.00915406 kWh (8 suppliers, which the file names only by identifier); sum of these 0.308749 kWh
- excavation, hydraulic digger: 2.06088e-5 m3
- extrusion, plastic pipes: 2.37915e-5 kg
- glass fibre: 1.4839e-5 kg
- inert waste, for final disposal: -0.000194826 kg
- iron sulfate: 0.0605087 kg
- limestone, crushed, washed: 0.000162494 kg
- pitch: 2.01516e-8, 5.77557e-7, 2.87683e-8, 2.54147e-6, 9.93311e-9, 4.49571e-7, 1.7429e-7 kg (7 suppliers, which the file names only by identifier); sum of these 3.80174e-6 kg
- polyacrylamide: 0.00452339 kg
- polyethylene, high density, granulate: 2.36689e-5 kg
- polyethylene, low density, granulate: 1.22637e-7 kg
- reinforcing steel: 0.000600062 kg
- sewage sludge, 70% water, WWT[R], WW from anaerobic digestion of whey: -0.243069 kg
- sewage sludge, 75% water, WWT[R], WW from anaerobic digestion of whey: -0.188126 kg
- sewage sludge, 97% water, WWT[R], WW from anaerobic digestion of whey: -5.64071 kg
- steel, chromium steel 18/8, hot rolled: 6.29126e-5 kg
- stone wool, packed: 6.62238e-6 kg
- synthetic rubber: 7.11293e-6 kg
- tap water: 1.04221e-6, 4.34328e-5, 1.72243e-6, 3.21396e-6, 0.000497024, 1.12989e-6, 0.000370365, 8.65818e-6 kg (8 suppliers, which the file names only by identifier); sum of these 0.000926589 kg
- waste bitumen: -2.56719e-6, -1.23455e-6 kg (2 suppliers, which the file names only by identifier); sum of these -3.80174e-6 kg
- waste graphical paper: -4.18565e-5, -9.57337e-6, -2.64939e-6, -2.31665e-7, -9.33483e-7, -0.0003223, -1.73498e-5, -1.72797e-6 kg (8 suppliers, which the file names only by identifier); sum of these -0.000396623 kg
- waste mineral wool: -4.69648e-6, -1.9259e-6 kg (2 suppliers, which the file names only by identifier); sum of these -6.62238e-6 kg
- waste plastic, mixture: -4.4121e-5, -2.22952e-7, -4.91908e-7, -0.000308872, -2.948e-6, -3.75932e-5, -1.15625e-6, -1.21763e-6 kg (8 suppliers, which the file names only by identifier); sum of these -0.000396623 kg
- waste polyethylene/polypropylene product: -1.70615e-5, -6.73001e-6 kg (2 suppliers, which the file names only by identifier); sum of these -2.37915e-5 kg
- waste reinforced concrete: -0.00113593, -0.0162117 kg (2 suppliers, which the file names only by identifier); sum of these -0.0173476 kg
- waste reinforcement steel: -0.000600062 kg
- waste rubber, unspecified: -3.55647e-6, -3.55647e-6 kg (2 suppliers, which the file names only by identifier); sum of these -7.11293e-6 kg

## Inputs from nature
- Occupation, construction site [natural resource, land]: 1.07307e-5 m2*year
- Occupation, industrial area [natural resource, land]: 0.000128769 m2*year
- Occupation, urban/industrial fallow (non-use) [natural resource, land]: 8.58457e-5 m2*year
- Oxygen [natural resource, in air]: 0.253808 kg
- Transformation, from pasture, man made [natural resource, land]: 5.36536e-6 m2
- Transformation, to industrial area [natural resource, land]: 3.21921e-6 m2
- Transformation, to urban/industrial fallow (non-use) [natural resource, land]: 2.14614e-6 m2

## Emissions to nature
- Carbon dioxide, fossil [air, non-urban air or from high stacks]: 0.00103679 kg
- Carbon dioxide, non-fossil [air, non-urban air or from high stacks]: 0.23149 kg
- Dinitrogen monoxide [air, non-urban air or from high stacks]: 7.42411e-5 kg
- Heat, waste [air, non-urban air or from high stacks]: 1.86047 MJ
- Methane, fossil [air, non-urban air or from high stacks]: 1.84522e-6 kg
- Methane, non-fossil [air, non-urban air or from high stacks]: 0.000109341 kg
- Nitrogen oxides [air, non-urban air or from high stacks]: 6.13033e-5 kg
- Particulate Matter, < 2.5 um [air, non-urban air or from high stacks]: 1.58456e-6 kg
- Water [air, non-urban air or from high stacks]: 6.67836e-5 m3
- BOD5, Biological Oxygen Demand [water, surface water]: 0.0218201 kg
- COD, Chemical Oxygen Demand [water, surface water]: 0.0887192 kg
- Calcium II [water, surface water]: 0.0292296 kg
- DOC, Dissolved Organic Carbon [water, surface water]: 0.0146606 kg
- Heat, waste [water, surface water]: 1.62177 MJ
- Iron ion [water, surface water]: 0.0186841 kg
- Nitrate [water, surface water]: 0.0910016 kg
- Phosphate [water, surface water]: 0.00977872 kg
- Potassium I [water, surface water]: 0.0690216 kg
- Sulfate [water, surface water]: 0.038264 kg
- TOC, Total Organic Carbon [water, surface water]: 0.0239782 kg
- Water [water, surface water]: 0.194952 m3
