# hard coal power plant construction, 500MW

Dataset: EcoSpold 2, unit process
Geography: GLO
Time period: 1980-01-01 to 2022-12-31
Technology level: current
Classification: ISIC rev.4 ecoinvent: 4220:Construction of utility projects
Classification: EcoSpold01Categories: hard coal/power plants
Tags: ConvertedDataset
Scenario: Business-as-Usual
System model: Allocation at the point of substitution
Generated by: Christian Bauer
Published in: Röder, A. 2007
Database: ecoinvent
isCopyrightProtected: true

## General comment
This dataset represents the components of a 500 MW coal power plant.
[This dataset was already contained in the ecoinvent database version 2. It was not individually updated during the transfer to ecoinvent version 3. Life Cycle Impact Assessment results may still have changed, as they are affected by changes in the supply chain, i.e. in other datasets. This dataset was generated following the ecoinvent quality guidelines for version 2. It may have been subject to central changes described in the ecoinvent version 3 change report (http://www.ecoinvent.org/database/ecoinvent-version-3/reports-of-changes/), and the results of the central updates were reviewed extensively. The changes added e.g. consistent water flows and other information throughout the database. The documentation of this dataset can be found in the ecoinvent reports of version 2, which are still available via the ecoinvent website. The change report linked above covers all central changes that were made during the conversion process.]

## Included activities start
From pasture land forseen for the construction of a coal power plant.

## Included activities end
This activity ends with a constructed coal power plant, having a total of 150'000 fully load hours. The datasets includes apart the materials necessary for the construction of the hard coal power plant also the construction efforts, land use as well as the disposal of all materials.

## Geography
German data for the end of the 1980s and US data for early 1980s.

## Technology
The 500 MW coal power plant is installed with an electrical filter and a flue gas desulfurization (DeSOx). Additionally a selective catalytic reduction (SCR) takes place and a DeNOx plant is installed. In the old federal states of Germany 90% of electricity production was produced from hard coal power plants within the capacity class 500 MW. This value is assumed for all UCTE countries. It represents an average technology in 1980s.
Reference:
BWK Mitteilung 3295 (1992) 90% kleine Kraftwerke. In: BWK Bd. 44 (1992) Nr. 3, S. 64.

## Reference product
- hard coal power plant: 1 unit; source DGMK-Arbeitskreis 1992; By-product classification allocatable product; CPC 53262: Power plants
  The materials depend on the capacity, fuel used, applied environmental technology and local conditions. Local conditions in particular, determine the amount of concrete for the foundation and the construction effort for the cooling tower and storage yards.
  As medium load power plant the hard coal power plant achieves typically 4'000 fully load hours per year. As a result of warm and cold cycles, 150’000 fully load hours in total are assumed. This corresponds to a lifetime of 33 years. The lifetime is a conservative estimate, since coal power plants may be operated 50 years or more. The fact that coal power plants are modernized several times during their lifetime is not considered. That would cause an additional material consumption. However, increases the lifetime and reduces the material consumption per generated unit of energy.
  EcoSpold01Location=GLO
  production volume 92 unit
    Calculated from a global electricty production from coal of 7.4E+9 MWh, 93% of capacity represented by plants above 250 MW, and 150000 hours lifetime
  property price 4.02995e7 EUR2005
    Calculated based on inputs: The price of the product has been calculated as a sum of the values of the material and energy inputs for this product. This value is therefore a rough estimation. It may underestimate the real price since there are additional expenses when producing any product. These expences can include for example labour costs, treatment of waste materials and profit for the producer. Please consider carefully whether this level of data quality is acceptable for your application.
  properties: carbon allocation 0 kg, carbon content 0

## Inputs from technosphere
- aluminium, cast alloy: 95998 kg; source Jensch W. 1988; lognormal variance with pedigree 0.16, pedigree (1,1,5,1,1)
  Estimation. Based on a range of literature data.
  Further references:
  DOE (1983) Energy Technology Characterizations Handbook; Environmental Pollution and Control Factors. U.S. Department of Energy. Washington, D.C.
  Gysel B. (1993) Personal communication, Sulzer Thermtec, 5.2.1993.
  ORNL (1980) A Methodology and a Preliminary Data Base for Examining the Health Risks of Electricity Generation from Uranium and Coal Fuels. Oak Ridge, USA.
  Fritsche U., Rausch L. Simon K.-H. (1989) Umweltanalyse von Energie-, Transport- und Stoffsystemen: Gesamt-Emissions-Modell Integrierter Systeme (GEMIS) Version 2.0. Darmstadt/Kassel.
  Uerpmann E.-P. (1990) Betriebserfahrungen mit nasser Rauchgasentschwefelung in Braunkohlekraftwerken. In: VGB-Seminar Rauchgasreinigung und Reststoffentsorgung in Kraftwerken, Industrie- und Heizkraftwerken. Cottbus, Deutschland.
  EcoSpold01Location=RER
  properties: dry mass 1 kg, wet mass 1 kg
- aluminium, wrought alloy: 203996 kg; source Jensch W. 1988; lognormal variance with pedigree 0.16, pedigree (1,1,5,1,1)
  (same comment as for aluminium, cast alloy)
  properties: dry mass 1 kg, wet mass 1 kg
- concrete, normal strength: 52498.9 m3; source Jensch W. 1988; lognormal variance with pedigree 0.16, pedigree (1,1,5,1,1)
  EcoSpold01Location=CH
  Estimation. Based on a range of literature data.
  Further references:
  DOE (1983) Energy Technology Characterizations Handbook; Environmental Pollution and Control Factors. U.S. Department of Energy. Washington, D.C.
  Gysel B. (1993) Personal communication, Sulzer Thermtec, 5.2.1993.
  ORNL (1980) A Methodology and a Preliminary Data Base for Examining the Health Risks of Electricity Generation from Uranium and Coal Fuels. Oak Ridge, USA.
  Fritsche U., Rausch L. Simon K.-H. (1989) Umweltanalyse von Energie-, Transport- und Stoffsystemen: Gesamt-Emissions-Modell Integrierter Systeme (GEMIS) Version 2.0. Darmstadt/Kassel.
  Uerpmann E.-P. (1990) Betriebserfahrungen mit nasser Rauchgasentschwefelung in Braunkohlekraftwerken. In: VGB-Seminar Rauchgasreinigung und Reststoffentsorgung in Kraftwerken, Industrie- und Heizkraftwerken. Cottbus, Deutschland.
  properties: dry mass 2190 kg, water content 0.086758, wet mass 2380 kg
- copper, cathode: 649987 kg; source Jensch W. 1988; lognormal variance with pedigree 0.16, pedigree (1,1,5,1,1)
  EcoSpold01Location=RER
  Estimation. Based on a range of literature data.
  Further references:
  DOE (1983) Energy Technology Characterizations Handbook; Environmental Pollution and Control Factors. U.S. Department of Energy. Washington, D.C.
  Gysel B. (1993) Personal communication, Sulzer Thermtec, 5.2.1993.
  ORNL (1980) A Methodology and a Preliminary Data Base for Examining the Health Risks of Electricity Generation from Uranium and Coal Fuels. Oak Ridge, USA.
  Fritsche U., Rausch L. Simon K.-H. (1989) Umweltanalyse von Energie-, Transport- und Stoffsystemen: Gesamt-Emissions-Modell Integrierter Systeme (GEMIS) Version 2.0. Darmstadt/Kassel.
  Uerpmann E.-P. (1990) Betriebserfahrungen mit nasser Rauchgasentschwefelung in Braunkohlekraftwerken. In: VGB-Seminar Rauchgasreinigung und Reststoffentsorgung in Kraftwerken, Industrie- und Heizkraftwerken. Cottbus, Deutschland.
  properties: dry mass 1 kg, wet mass 1 kg
- diesel, burned in building machine: 8.09983e7 MJ; source Jensch W. 1988; lognormal variance with pedigree 0.16, pedigree (1,1,5,1,1)
  EcoSpold01Location=GLO
  Estimation. Used as auxiliary material for construction machines. Based on a range of literature data.
  Further references:
  DOE (1983) Energy Technology Characterizations Handbook; Environmental Pollution and Control Factors. U.S. Department of Energy. Washington, D.C.
  Gysel B. (1993) Personal communication, Sulzer Thermtec, 5.2.1993.
  ORNL (1980) A Methodology and a Preliminary Data Base for Examining the Health Risks of Electricity Generation from Uranium and Coal Fuels. Oak Ridge, USA.
  Fritsche U., Rausch L. Simon K.-H. (1989) Umweltanalyse von Energie-, Transport- und Stoffsystemen: Gesamt-Emissions-Modell Integrierter Systeme (GEMIS) Version 2.0. Darmstadt/Kassel.
  Uerpmann E.-P. (1990) Betriebserfahrungen mit nasser Rauchgasentschwefelung in Braunkohlekraftwerken. In: VGB-Seminar Rauchgasreinigung und Reststoffentsorgung in Kraftwerken, Industrie- und Heizkraftwerken. Cottbus, Deutschland.
  properties: heating value, net 1 MJ
- electricity, medium voltage: 5.24989e6 kWh; source Jensch W. 1988; lognormal variance with pedigree 0.16, pedigree (1,1,5,1,1)
  Estimation. Based on a range of literature data.
  Further references:
  DOE (1983) Energy Technology Characterizations Handbook; Environmental Pollution and Control Factors. U.S. Department of Energy. Washington, D.C.
  Gysel B. (1993) Personal communication, Sulzer Thermtec, 5.2.1993.
  ORNL (1980) A Methodology and a Preliminary Data Base for Examining the Health Risks of Electricity Generation from Uranium and Coal Fuels. Oak Ridge, USA.
  Fritsche U., Rausch L. Simon K.-H. (1989) Umweltanalyse von Energie-, Transport- und Stoffsystemen: Gesamt-Emissions-Modell Integrierter Systeme (GEMIS) Version 2.0. Darmstadt/Kassel.
  Uerpmann E.-P. (1990) Betriebserfahrungen mit nasser Rauchgasentschwefelung in Braunkohlekraftwerken. In: VGB-Seminar Rauchgasreinigung und Reststoffentsorgung in Kraftwerken, Industrie- und Heizkraftwerken. Cottbus, Deutschland.
  EcoSpold01Location=UCTE
- heat, district or industrial, other than natural gas: 8.09983e7 MJ; source Jensch W. 1988; lognormal variance with pedigree 0.16, pedigree (1,1,5,1,1)
  Estimation. Process heat for the oil. Based on a range of literature data.
  Further references:
  DOE (1983) Energy Technology Characterizations Handbook; Environmental Pollution and Control Factors. U.S. Department of Energy. Washington, D.C.
  Gysel B. (1993) Personal communication, Sulzer Thermtec, 5.2.1993.
  ORNL (1980) A Methodology and a Preliminary Data Base for Examining the Health Risks of Electricity Generation from Uranium and Coal Fuels. Oak Ridge, USA.
  Fritsche U., Rausch L. Simon K.-H. (1989) Umweltanalyse von Energie-, Transport- und Stoffsystemen: Gesamt-Emissions-Modell Integrierter Systeme (GEMIS) Version 2.0. Darmstadt/Kassel.
  Uerpmann E.-P. (1990) Betriebserfahrungen mit nasser Rauchgasentschwefelung in Braunkohlekraftwerken. In: VGB-Seminar Rauchgasreinigung und Reststoffentsorgung in Kraftwerken, Industrie- und Heizkraftwerken. Cottbus, Deutschland.
  EcoSpold01Location=RER
  properties: heating value, net 1 MJ
- polyethylene, high density, granulate: 499990 kg; source Jensch W. 1988; lognormal variance with pedigree 0.16, pedigree (1,1,5,1,1)
  EcoSpold01Location=RER
  Estimation. Polyethylene is taken as a proxy for lacquer and rubber. Based on a range of literature data.
  Further references:
  DOE (1983) Energy Technology Characterizations Handbook; Environmental Pollution and Control Factors. U.S. Department of Energy. Washington, D.C.
  Gysel B. (1993) Personal communication, Sulzer Thermtec, 5.2.1993.
  ORNL (1980) A Methodology and a Preliminary Data Base for Examining the Health Risks of Electricity Generation from Uranium and Coal Fuels. Oak Ridge, USA.
  Fritsche U., Rausch L. Simon K.-H. (1989) Umweltanalyse von Energie-, Transport- und Stoffsystemen: Gesamt-Emissions-Modell Integrierter Systeme (GEMIS) Version 2.0. Darmstadt/Kassel.
  Uerpmann E.-P. (1990) Betriebserfahrungen mit nasser Rauchgasentschwefelung in Braunkohlekraftwerken. In: VGB-Seminar Rauchgasreinigung und Reststoffentsorgung in Kraftwerken, Industrie- und Heizkraftwerken. Cottbus, Deutschland.
  properties: carbon content, fossil 0.857143, dry mass 1 kg, heating value, net 42.47 MJ, wet mass 1 kg
  note on carbon content, fossil: Polyethylene is formed out of a huge amount of ethylene monomers (C2H4) (ecoinvent v2.2 report 11_II). MW=28 g/mol
- reinforcing steel: 4.21991e7 kg; source Jensch W. 1988; lognormal variance with pedigree 0.16, pedigree (1,1,5,1,1)
  EcoSpold01Location=RER
  Estimation. Reinforcing steel is taken as a proxy for unalloyed steel. Based on a range of literature data.
  Further references:
  DOE (1983) Energy Technology Characterizations Handbook; Environmental Pollution and Control Factors. U.S. Department of Energy. Washington, D.C.
  Gysel B. (1993) Personal communication, Sulzer Thermtec, 5.2.1993.
  ORNL (1980) A Methodology and a Preliminary Data Base for Examining the Health Risks of Electricity Generation from Uranium and Coal Fuels. Oak Ridge, USA.
  Fritsche U., Rausch L. Simon K.-H. (1989) Umweltanalyse von Energie-, Transport- und Stoffsystemen: Gesamt-Emissions-Modell Integrierter Systeme (GEMIS) Version 2.0. Darmstadt/Kassel.
  Uerpmann E.-P. (1990) Betriebserfahrungen mit nasser Rauchgasentschwefelung in Braunkohlekraftwerken. In: VGB-Seminar Rauchgasreinigung und Reststoffentsorgung in Kraftwerken, Industrie- und Heizkraftwerken. Cottbus, Deutschland.
  properties: carbon content, fossil 0.004, dry mass 1 kg, wet mass 1 kg
- steel, chromium steel 18/8, hot rolled: 399992 kg; source Jensch W. 1988; lognormal variance with pedigree 0.16, pedigree (1,1,5,1,1)
  (same comment as for aluminium, cast alloy)
  properties: carbon content, fossil 0.0008, dry mass 1 kg, wet mass 1 kg
  note on carbon content, fossil: Stainless steel model is the grade 304 steel (18/8 stainless, 18% chromium 8% nickel; max. 0.08% C)
- steel, low-alloyed, hot rolled: 3.59993e6 kg; source Jensch W. 1988; lognormal variance with pedigree 0.16, pedigree (1,1,5,1,1)
  (same comment as for copper, cathode)
  properties: carbon content, fossil 0.005, dry mass 1 kg, wet mass 1 kg
  note on carbon content, fossil: Low alloyed steel composition given in Tab. 3.2 ecoinvent v2.2 report 10_partII. Steel assumed to have a C content of 0.5%
- stone wool: 374992 kg; source Jensch W. 1988; lognormal variance with pedigree 0.16, pedigree (1,1,5,1,1)
  Estimation. Based on a range of literature data.
  Further references:
  DOE (1983) Energy Technology Characterizations Handbook; Environmental Pollution and Control Factors. U.S. Department of Energy. Washington, D.C.
  Gysel B. (1993) Personal communication, Sulzer Thermtec, 5.2.1993.
  ORNL (1980) A Methodology and a Preliminary Data Base for Examining the Health Risks of Electricity Generation from Uranium and Coal Fuels. Oak Ridge, USA.
  Fritsche U., Rausch L. Simon K.-H. (1989) Umweltanalyse von Energie-, Transport- und Stoffsystemen: Gesamt-Emissions-Modell Integrierter Systeme (GEMIS) Version 2.0. Darmstadt/Kassel.
  Uerpmann E.-P. (1990) Betriebserfahrungen mit nasser Rauchgasentschwefelung in Braunkohlekraftwerken. In: VGB-Seminar Rauchgasreinigung und Reststoffentsorgung in Kraftwerken, Industrie- und Heizkraftwerken. Cottbus, Deutschland.
  EcoSpold01Location=CH
  properties: carbon content, fossil 0.015401, dry mass 1 kg, wet mass 1 kg
  note on carbon content, fossil: The chemical composition of the glass fibres used in the rock wool production is similar to the composition of naturally cooled volcano basalt and has a composition listed in Tab. 3.1 and 3.2 in ecoinvent v2.2 report 16, part XIV. Rock wool contains: a minimum of 96% mineral fibres,between 0.5 and 3.0 weight percent of phenolic resin depending on the specific product characteristics, and about 0.2 percent mineral oil (ecoinvent v2.2 report 16, part XIV). An average composition of 1.8% phenolic resin, 0.2% mineral oil, and 98% mineral fibres has been assumed and used to calculate C content of the rock wool
- waste mineral wool: -265059, -1240.27, -108693 kg (3 suppliers, which the file names only by identifier); sum of these -374992 kg; lognormal variance with pedigree 0.12, pedigree (1,1,1,1,1)
  Estimation.
  EcoSpold01Location=CH
  production volume
    Calculated from the production volume of hard coal power plant in proportion to the respective output amounts.
  properties: dry mass 1 kg, wet mass 1 kg
- waste polyethylene/polypropylene product: -355537, -140244, -4208.36 kg (3 suppliers, which the file names only by identifier); sum of these -499990 kg; lognormal variance with pedigree 0.12, pedigree (1,1,1,1,1)
  Estimation.
  EcoSpold01Location=CH
  production volume
    (same comment as for waste mineral wool)
  properties: carbon content, fossil 0.748045, dry mass 0.847 kg, heating value, net 42.47 MJ, water content 0.180638, wet mass 1 kg
  note on carbon content, fossil: Mixed various plastics was used to estimate the C content of this waste (Tab A.2, ecoinvent v2.2 report 13_I)
- waste reinforced concrete: -8.57181e6, -90824.8, -1.22335e8 kg (3 suppliers, which the file names only by identifier); sum of these -1.30997e8 kg; lognormal variance with pedigree 0.12, pedigree (1,1,1,1,1)
  Estimation.
  EcoSpold01Location=CH
  production volume
    (same comment as for waste mineral wool)
  properties: dry mass 0.99418 kg, water content 0.00585407, wet mass 1 kg

## Inputs from nature
All rows: source Jensch W. 1988; lognormal variance with pedigree 0.16, pedigree (1,1,5,1,1)
- Occupation, construction site [natural resource, land]: 249995 m2*year
  Estimation. General information on land use of coal power plants can be found in (Jensch 1988), (VDI 1993), (Jacobs et al. 1981), (GEK 1978), (OECD 1985), (DOE 1983), (IAEA 1991) and vary from 100-3700 m2/MW. The largest deviations arise from the consideration of landfill sites for ash and residues from flue gas cleaning. In the U.S., these are deposited on the plant site. In Europe, the values vary from 100-600 m2/MW. Important influencing factors are the size of the coal storage, capacity of the plant, applied method of cooling , use of environmental technology, area available and the chosen boundary. These values are also confirmed by exemplary values for environmental statements (HKW Heilbronn 2002), (RDK 2000). 30m2 per MW are assumed for storage area, 60m2 per MW for building area and 80m2 per MW for traffic area, whereby traffic area is assumed for the tanks of the power plant (CORINE 121a). The area is derived from 4’000 fully load hours per year resp. 150’000 fully load hours in total.
  Further references:
  VDI (1993) Instrumente zur Minderung energiebedingter Klimagasemissionen IKARUS. VDI Bericht 1043. Tagung Schliersee, 29./30. Apri 1993, Schliersee, Deutschland.
  DOE (1983) Energy Technology Characterizations Handbook; Environmental Pollution and Control Factors. U.S. Department of Energy. Washington, D.C.
  Jacobs H., Kreutzer A., Pleyer H., Stoll A. (1981) Grundflächenbedarf von Kraftwerken. In: Siemens-Energietechnik 3 Heft 8-9, s. 298-302.
  GEK (1978) Die Umweltbelastung im Energiebereich. Schriftenreihe der Eidg. Kommission für die Gesamtenergiekonzeption, Studie Nr. 24, Bern.
  OECD (1985) Environmental Effects of Electricity Generation. Organisation for Economic Co-operation and Development/International Energy Agency, Paris.
  IAEA (1991) Senior Expert Symposium on the electricity and the environment. Helsinki 13-17 May 1991, Vienna.
  RDK (2000) Rheinhafen-Dampfkraftwerk Karlsruhe. Umwelterklärung 2000. Energie Baden-Württemberg AG, Karlsruhe.
- Occupation, industrial area [natural resource, land]: 2.20995e6 m2*year
  (same comment as for Occupation, construction site)
- Occupation, traffic area, road network [natural resource, land]: 1.03998e6 m2*year
  (same comment as for Occupation, construction site)
- Transformation, from unspecified [natural resource, land]: 124997 m2
  (same comment as for Occupation, construction site)
- Transformation, to industrial area [natural resource, land]: 84998.2 m2
  (same comment as for Occupation, construction site)
- Transformation, to traffic area, road network [natural resource, land]: 39999.2 m2
  (same comment as for Occupation, construction site)

## Sampling procedure
Based on literature data for coal power plants.

## Review by Thomas Kägi 2007-08-31
passed

## Review by Roland Hischier 2011-09-23
Tansfer of documentation done.
