# coating service, melamine impregnated paper, double-sided

Dataset: EcoSpold 2, unit process
Geography: RoW
Time period: 2012-01-01 to 2022-12-31
Technology level: current
Classification: ISIC rev.4 ecoinvent: 1621:Manufacture of veneer sheets and wood-based panels
Scenario: Business-as-Usual
System model: Allocation at the point of substitution
Generated by: Frank Werner
Database: ecoinvent
isCopyrightProtected: true

## General comment
This dataset is an identical copy of corresponding RER dataset.Both particleboard and medium density fibreboard are frequently coated with melamine-impregnated paper. Such coated boards are particularly used for interior works such as for furniture or in kitchens. The dataset describes the service of double-sided coating of wood-based boards and can be used for the coating of various types of wood-based boards.
The data stems from several plants in Europe that start from different states of pre-produced resins.

The area weight of the inventoried melamine impregnated paper is 302 gr/m2, corresponding to a paper weight of 104 gr/m2

## Included activities start
The activity starts with the reception of the melamine-impregnated paper at the factory gate/or from the internal department producing the melamine-impregnated paper.

## Included activities end
The activity ends with the double-sided application of melamine coated paper on wood-based boards at the factory. The wood-based board is not included. Possible airborne emissions are not included due to the lack of specific data. As for the infrastructure it may be assumed that it is included in the dataset of the production of the wood-based boards as the production of melamine faced paper is often produced at the same site.

## Geography
Data collected based on survey data from several plants producing coated wood based panels (plus melamine impregnated paper) and completed with additional information from e.g. environmental product declarations.

## Parameters
- scaling factor: 2.16068 dimensionless

## Reference product
- coating, with melamine impregnated paper: 1 m2; name RP; By-product classification allocatable product; CPC 54730: Painting services
  Amount was scaled to 1.
  production volume 4.33197e9 m2
    annual production of melamine impregnated paper divided by area weight, assuming double-sided coating. The area weight of the inventoried melamine impregnated paper is 302 gr/m2, corresponding to a paper weight of 104 gr/m2
  property price 0.463776 EUR2005
    Calculated based on inputs: The price of the product has been calculated as a sum of the values of the material and energy inputs for this product. This value is therefore a rough estimation. It may underestimate the real price since there are additional expenses when producing any product. These expences can include for example labour costs, treatment of waste materials and profit for the producer. Please consider carefully whether this level of data quality is acceptable for your application.
  properties: carbon allocation 0 kg, carbon content 0

## Inputs from technosphere
- electricity, medium voltage: 0.0446118, 0.0139203, 0.000414547, 0.00211519, 0.12772, 0.00698611 kWh (6 suppliers, which the file names only by identifier); sum of these 0.195768 kWh; = 0.705/3.6; lognormal variance with pedigree 0.0356, pedigree (1,3,4,5,1)
  MJ converted to kWh
  Amount was scaled to the amount of reference product.
- heat, district or industrial, natural gas: 0.354062, 0.00581815 MJ (2 suppliers, which the file names only by identifier); sum of these 0.35988 MJ; lognormal variance with pedigree 0.0356, pedigree (1,3,4,5,1)
  Amount was scaled to the amount of reference product.
  properties: heating value, net 1 MJ
- paper, melamine impregnated: 0.603799 kg; name paper; = 2*0.302; lognormal variance with pedigree 0.0356, pedigree (1,3,4,5,1)
  Double sided application of melamine faced paper (at 302 gr/m2, incl. resin)
  Amount was scaled to the amount of reference product.
  properties: carbon content, fossil 0.3635, carbon content, non-fossil 0.1432, dry mass 1 kg, heating value, net 15.35 MJ, wet mass 1 kg
- tap water: 0.000288459, 0.0120211, 0.000476725, 0.000889545, 0.137564, 0.000312726, 0.00239637 kg (7 suppliers, which the file names only by identifier); sum of these 0.153949 kg; lognormal variance with pedigree 0.0356, pedigree (1,3,4,5,1)
  Amount was scaled to the amount of reference product.
  properties: carbon content, fossil 0.00178991, dry mass 0.000337476 kg, water content 2962.17, wet mass 1 kg
  note on carbon content, fossil: Bicarbonate content is 2.93 mol/m3. CO2 content is 0.1 mol/m3 (ecoinvent v2.2 report 8, Tab 93.1).
- waste packaging paper: -0.032137, -0.0492736, -1.53533e-10, -0.178046, -0.322673, -0.00430853, -0.017361 kg (7 suppliers, which the file names only by identifier); sum of these -0.603799 kg; = paper; lognormal variance with pedigree 0.0012, pedigree (1,3,1,1,1)
  Waste output based on paper input.
  production volume
    Calculated from production volume of reference product using the relative outputs.
  properties: carbon content, fossil 0.3635, carbon content, non-fossil 0.1432, dry mass 1 kg, heating value, net 14.11 MJ, price 0.1 EUR2005, wet mass 1 kg
  note on carbon content, fossil: fossil carbon content on a dry matter basis. Set to same content as paper input.
  note on carbon content, non-fossil: biogene carbon content on a dry matter basis. Set to same content as paper input.

## Emissions to nature
- Water [air, unspecified]: 0.000153949 m3; lognormal variance with pedigree 0.0356, pedigree (1,3,4,5,1)
  Amount was scaled to the amount of reference product.

## Sampling procedure
The life cycle inventory has been compiled based on survey data from several plants producing coated wood based panels (plus melamine impregnated paper) and completed with additional information from e.g. environmental product declarations. As such, the LCI does not represent a statistical average but a best guess based on the available information.

## Extrapolations
identical copy of corresponding RER dataset. The uncertainty has been adjusted accordingly.
