# mine construction, phosphate rock

Dataset: EcoSpold 2, unit process
Geography: RoW
Time period: 1994-01-01 to 2022-12-31
Technology level: current
Classification: EcoSpold01Categories: chemicals/inorganics
Classification: ISIC rev.4 ecoinvent: 4290:Construction of other civil engineering projects
Tags: ConvertedDataset
Scenario: Business-as-Usual
System model: Allocation at the point of substitution
Share of production covered: 30 %
Generated by: Alex Primas
Published in: Althaus H.-J. 2007
Database: ecoinvent
isCopyrightProtected: true

## General comment
Large uncertainties for equipment used due to weak data from only 2 mines and various assumtions.
[This dataset was already contained in the ecoinvent database version 2. It was not individually updated during the transfer to ecoinvent version 3. Life Cycle Impact Assessment results may still have changed, as they are affected by changes in the supply chain, i.e. in other datasets. This dataset was generated following the ecoinvent quality guidelines for version 2. It may have been subject to central changes described in the ecoinvent version 3 change report (http://www.ecoinvent.org/database/ecoinvent-version-3/reports-of-changes/), and the results of the central updates were reviewed extensively. The changes added e.g. consistent water flows and other information throughout the database. The documentation of this dataset can be found in the ecoinvent reports of version 2, which are still available via the ecoinvent website. The change report linked above covers all central changes that were made during the conversion process.]

## Included activities end
Mining equipment, equipment for beneficiation, buildings for beneficiation plant, land use of processing pant.

## Geography
Assumption for infrastructure based on weak data of 1 Moroccan and 1 U.S. mine.

## Technology
No specific technology modelled

## Time period
Time of literature publication. Measurements took place partly before this period.

## Reference product
- mine infrastructure, phosphate rock: 1 unit; By-product classification allocatable product; CPC 53261: Mining constructions
  EcoSpold01Location=MA
  Uncertainty not applicable for output
  production volume 1.42306 unit
    Calculated from the requirement per kg P2O5 in the phosphate rock production dataset
  property price 5.35708e7 EUR2005
    Calculated based on inputs: The price of the product has been calculated as a sum of the values of the material and energy inputs for this product. This value is therefore a rough estimation. It may underestimate the real price since there are additional expenses when producing any product. These expences can include for example labour costs, treatment of waste materials and profit for the producer. Please consider carefully whether this level of data quality is acceptable for your application.
  properties: carbon allocation 0 kg, carbon content 0

## Inputs from technosphere
- building, hall, steel construction: 101000 m2; lognormal variance with pedigree 0.35, pedigree (5,5,5,5,5)
  EcoSpold01Location=CH
  Estimated from photograph of 2 mines
  Uncertainty: Estimated from photograph of 2 mines
- conveyor belt: 89500 m; lognormal variance with pedigree 0.35, pedigree (5,5,5,5,5)
  Estimated from data of 2 mines; proxy used
  EcoSpold01Location=RER
  Uncertainty: Estimated from data of 2 mines; proxy used
- drawing of pipe, steel: 650000 kg; lognormal variance with pedigree 0.21, pedigree (5,5,5,5,4)
  Estimated from data of 2 mines
  EcoSpold01Location=RER
  Uncertainty: Estimated from data of 2 mines
- hydraulic digger: 246 unit; lognormal variance with pedigree 0.35, pedigree (5,5,5,5,5)
  EcoSpold01Location=RER
  Estimated from data of 2 mines; proxy used
  Uncertainty: Estimated from data of 2 mines; proxy used
- industrial machine, heavy, unspecified: 224252, 110748 kg (2 suppliers, which the file names only by identifier); sum of these 335000 kg; lognormal variance with pedigree 0.35, pedigree (5,5,5,5,5)
  (same comment as for conveyor belt)
- liquid storage tank, chemicals, organics: 1.215 unit; lognormal variance with pedigree 0.35, pedigree (5,5,5,5,5)
  Estimated from data of 2 mines; proxy used
  EcoSpold01Location=CH
  Uncertainty: Estimated from data of 2 mines; proxy used
- steel, low-alloyed, hot rolled: 650000 kg; lognormal variance with pedigree 0.21, pedigree (5,5,5,5,4)
  EcoSpold01Location=RER
  Estimated from data of 2 mines
  Uncertainty: Estimated from data of 2 mines
  properties: carbon content, fossil 0.005, dry mass 1 kg, wet mass 1 kg
  note on carbon content, fossil: Low alloyed steel composition given in Tab. 3.2 ecoinvent v2.2 report 10_partII. Steel assumed to have a C content of 0.5%

## Inputs from nature
- Occupation, construction site [natural resource, land]: 350000 m2*year; lognormal variance with pedigree 0.25, pedigree (5,5,5,5,4)
  Estimated from map of 1 U.S. mine
  Uncertainty: Estimated from map of 1 U.S. mine
- Occupation, industrial area [natural resource, land]: 1.4e6 m2*year; lognormal variance with pedigree 0.25, pedigree (5,5,5,5,4)
  Estimated from map of 1 U.S. mine
  Uncertainty: Estimated from map of 1 U.S. mine
- Transformation, from pasture, man made [natural resource, land]: 70000 m2; lognormal variance with pedigree 0.33, pedigree (5,5,5,5,4)
  Estimated from map of 1 U.S. mine
  Uncertainty: Estimated from map of 1 U.S. mine
- Transformation, to industrial area [natural resource, land]: 70000 m2; lognormal variance with pedigree 0.33, pedigree (5,5,5,5,4)
  Estimated from map of 1 U.S. mine
  Uncertainty: Estimated from map of 1 U.S. mine

## Sampling procedure
Estimation from literature

## Extrapolations
Extrapolation from 1 U.S. and 1 Moroccan mine. The moroccan mine concerned has 30% market share, therefore representativeness set to 30%.. This dataset has been copied from an original dataset covering the geography MA. The uncertainty has been adjusted accordingly.

## Review by Roland Hischier 2003-08-26
Passed.
