# treatment of sewage sludge, 70% water, WWT, WW from maize starch production, municipal incineration FAE

Dataset: EcoSpold 2, unit process
Geography: CH
Time period: 2006-01-01 to 2022-12-31
Technology level: current
Classification: ISIC rev.4 ecoinvent: 3821:Treatment and disposal of non-hazardous waste
Scenario: Business-as-Usual
System model: Allocation at the point of substitution
Generated by: Nikolia Stoikou
Database: ecoinvent
isCopyrightProtected: true

## General comment
The process represents the treatment of a waste (sewage sludge) that is exclusively produced from another waste treatment. Municipal incineration is the controlled combustion of a waste. Sewage sludge is generated in the wastewater treatment of 'wastewater from maize starch production'. Recommended use of this dataset: to be used within the specific chain of treatments for 'wastewater from maize starch production'. Share of biogenic carbon in the sludge: 98.148%.

## Included activities start
The activity starts with the waste being available at the gate of the treatment facility. Collection and transportation of the waste to the treatment plant is not included.

## Included activities end
The activity ends with the waste being treated and waste-specific emissions from the incineration process are released to the environment (air and water).

## Geography
Modelling parameters affecting the treatment technology are specific to this geography and to the technology mix encountered in Switzerland in 2012.

## Technology
The waste is treated in the incineration plant with flue gas cleaning. Incineration is the controlled combustion of a waste. Auxiliary material consumption for this step of air pollution control (APC) are included in the process. Infrastructure is also included in the process. Air polution control includes, electrostatic precipitator for fly ash (ESP), wet flue gas scrubber and 25% SNCR , 42.77% SCR-high dust , 32.68% SCR-low dust -DeNOx facilities and 0% without DeNOx (weighted according to mass of burnt waste). Efficiency of iron scrap separation from slag : 58%. Efficiency of aluminium scrap separation from slag : 31%. Efficiency of copper scrap separation from slag : 31%. The technology mix for this dataset includes a filter ash treatment (FLUWA) of a share of 46.22%. Gross electric efficiency technology mix 15.84% and Gross thermal efficiency technology mix 28.51%

## Reference product
- heat, for reuse in municipal waste incineration only: 1 MJ; By-product classification allocatable product; CPC 17300: Steam and hot water; lognormal variance with pedigree 0.093039, pedigree (1,1,1,1,1)
  net useful heat generated from this waste and used in internal MSWI plant energy redistribution.
  Uncertainty: uncertainty is calculated from uncertainties in waste composition and uncertainties in energy efficiency and the uncertainty in internal energy demand
  production volume 498148 MJ
    Calculated from the production volume of the reference product in proportion to the respective output amounts.
  property price 0.0106 EUR2005
    Average European district heat price from Ecoheatcool and Euroheat 2005-2006, Ecoheat Work package 1: The European heat market. Final report. 10.6 EUR/GJ i s the price of district heat. http://www.solarthermalworld.org/files/Ecoheatcool%20WP1%20Web.pdf?download
  properties: carbon allocation 0 kg, carbon content 0

## Inputs from technosphere
- chemical factory, organics: 3.686e-11 unit
- electricity, medium voltage: 4.59188e-5, 0.000129236, 1.23539e-5, 3.44154e-6, 4.19896e-5, 0.00451415, 5.83045e-6, 0.000221967, 0.00140856, 0.000278283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 kWh (46 suppliers, which the file names only by identifier); sum of these 0.0234467 kWh
- heat, district or industrial, natural gas: 0.361443, 0.00593944, 0.000111697 MJ (3 suppliers, which the file names only by identifier); sum of these 0.367494 MJ
- maize grain: 0.00687312, 0.000219492, 0.109109 kg (3 suppliers, which the file names only by identifier); sum of these 0.116201 kg
- tap water: 0.000337262, 0.0140549, 0.000557381, 0.000250654, 0.00104004, 0.160838, 0.000365636, 0.0028018 kg (8 suppliers, which the file names only by identifier); sum of these 0.180245 kg
- wastewater from maize starch production: -3.06446e-7, -6.33692e-5 m3 (2 suppliers, which the file names only by identifier); sum of these -6.36757e-5 m3

## Emissions to nature
- Water [air, unspecified]: 0.000104913 m3
- Water [water, unspecified]: 1.1657e-5 m3

## Extrapolations
Modelling parameters are based on an average municipal solid waste incineration plant in Switzerland for the year of 2010 (grate incinerators).
