# paper mill construction, integrated

Dataset: EcoSpold 2, unit process
Geography: RER
Time period: 2000-01-01 to 2022-12-31
Technology level: current
Classification: EcoSpold01Categories: paper & cardboard/graphic paper
Classification: ISIC rev.4 ecoinvent: 4290:Construction of other civil engineering projects
Tags: ConvertedDataset
Scenario: Business-as-Usual
System model: Allocation at the point of substitution
Generated by: Roland Hischier
Published in: Hischier R. 2007
Database: ecoinvent
isCopyrightProtected: true

## General comment
The dataset represents an integrated paper mill with a annual production of 368 kt and a total life time of 50 years.
[This dataset was already contained in the ecoinvent database version 2. It was not individually updated during the transfer to ecoinvent version 3. Life Cycle Impact Assessment results may still have changed, as they are affected by changes in the supply chain, i.e. in other datasets. This dataset was generated following the ecoinvent quality guidelines for version 2. It may have been subject to central changes described in the ecoinvent version 3 change report (http://www.ecoinvent.org/database/ecoinvent-version-3/reports-of-changes/), and the results of the central updates were reviewed extensively. The changes added e.g. consistent water flows and other information throughout the database. The documentation of this dataset can be found in the ecoinvent reports of version 2, which are still available via the ecoinvent website. The change report linked above covers all central changes that were made during the conversion process.]

## Included activities end
This module includes land-use, buildings (hall and multi-story) and streets within the mill area, machineries for pulp, paper and energy production as well as the dismanteling/disposal of the whole infrastructure (without the paper machine)

## Geography
Average land-use from European paper mills, valable for whole Europe

## Technology
Typical European paper mill

## Reference product
- paper mill, integrated: 1 unit; By-product classification allocatable product; CPC 53269: Other constructions for manufacturing
  EcoSpold01Location=RER
  production volume 1.32237 unit
    This is a placeholder value that does not reflect real-world production volumes. This dataset does not currently require a real-world production volume to work in the database framework, and no actual data were collected yet. This has no negative effect on the results of the ecoinvent database. The placeholder value of this activity was scaled according to the nominal GDP of 2005 (source: United Nations, http://data.un.org/Glossary.aspx?q=GDP+%28current+US%24%29, accessed 20130726) to reflect an appropriate share of the global production volume, which is also a placeholder value.
  property price 7.03454e8 EUR2005
    Convert from EU 27 price to the world by currency exchange rate.
  properties: carbon allocation 0 kg, carbon content 0

## Inputs from technosphere
- building, hall, steel construction: 120929 m2; lognormal variance with pedigree 0.4921, pedigree (5,4,5,3,4)
  Estimated, based on photos
  EcoSpold01Location=CH
  Uncertainty: Estimated, based on photos
- building, multi-storey: 150912 m3; lognormal variance with pedigree 0.4921, pedigree (5,4,5,3,4)
  EcoSpold01Location=RER
  Estimated, based on photos
  Uncertainty: Estimated, based on photos
- chemical factory: 6.24634e6 kg; lognormal variance with pedigree 0.4921, pedigree (5,4,5,3,4)
  Rough estimation
  EcoSpold01Location=RER
  Uncertainty: rough estimation
- decommissioned chemical production facilities: -6.24634e6 kg; lognormal variance with pedigree 0.4521, pedigree (5,4,1,3,4)
  EcoSpold01Location=RER
  Calculated from input facilities
  Uncertainty: calculated from input facilities
  production volume
    Calculated from the production volume of paper mill, integrated in proportion to the respective output amounts.
  properties: carbon content, fossil 0.0169382, carbon content, non-fossil 5.78006e-6, dry mass 1 kg, wet mass 1 kg
  note on carbon content, fossil: Calculated from C content in input materials in the infrastructure
- industrial furnace, 1MW, oil: 2.49854 unit; lognormal variance with pedigree 0.4921, pedigree (5,4,5,3,4)
  EcoSpold01Location=CH
  Approximation for energy system
  Uncertainty: approximation for energy system
- paper machine: 1.99883 unit; lognormal variance with pedigree 0.3406, pedigree (1,3,5,1,1)
  Information from several european mills
  EcoSpold01Location=RER
  Uncertainty: Information from several european mills
- road, company, internal: 754558 m2*year; lognormal variance with pedigree 0.4921, pedigree (5,4,5,3,4)
  EcoSpold01Location=CH
  Estimated, based on photos
  Uncertainty: Estimated, based on photos
- wastewater treatment facility, capacity 1.6E8l/year: 1.66902 unit; lognormal variance with pedigree 0.4921, pedigree (5,4,5,3,4)
  EcoSpold01Location=CH
  Approximation
  Uncertainty: Approximation

## Inputs from nature
- Occupation, construction site [natural resource, land]: 301823 m2*year; lognormal variance with pedigree 0.2421, pedigree (5,4,5,3,4)
  Estimation
  Uncertainty: Estimation
- Occupation, industrial area [natural resource, land]: 1.29924e7 m2*year; lognormal variance with pedigree 0.0806, pedigree (1,3,5,1,1)
  Information from several european mills
  Uncertainty: Information from several european mills
- Transformation, from unspecified [natural resource, land]: 259848 m2; lognormal variance with pedigree 0.1606, pedigree (1,3,5,1,1)
  (same comment as for Occupation, industrial area)
- Transformation, to industrial area [natural resource, land]: 259848 m2; lognormal variance with pedigree 0.1606, pedigree (1,3,5,1,1)
  (same comment as for Occupation, industrial area)

## Sampling procedure
literature

## Extrapolations
Only land-use data are average data from European paper mills. Other information is estimated, based on photos and literature

## Review by Hans-Jörg Althaus 2003-07-02
passed
