# treatment of wastewater from liquid crystal display backlight production, wastewater treatment

Dataset: EcoSpold 2, unit process
Geography: CH
Time period: 2010-01-01 to 2022-12-31
Technology level: current
Classification: ISIC rev.4 ecoinvent: 3700:Sewerage
Scenario: Business-as-Usual
System model: Allocation at the point of substitution
Generated by: Nikolia Stoikou
Database: ecoinvent
isCopyrightProtected: true

## General comment
This dataset represents the treatment of a wastewater, generated from an ordinary transforming activity. Purification in wastewater treatment of 'wastewater from liquid crystal display backlight production'. Recommended use of this dataset: to be used for wastewaters, generated from ordinary transforming activities, of equal or similar composition. The wastewater has a content of TOC: 1.0766 kg/m3, COD: 4.19727 kg/m3 and BOD: 2.03002 kg/m3. TOC is equal to C present in the wastewater, COD is calculated as TOC/0.2565 and BOD is calculated as COD/0.53034. Detailed elemental composition can be found in the properties of the wastewater treated. Share of biogenic carbon in the sludge: 0%.

## Included activities start
The activity starts with the wastewater being available at the gate of the treatment facility. Collection and transportation of the wastewater to the treatment plant is not included.

## Included activities end
The activity ends with the wastewater being treated and waste-specific emissions released to the environment. Expenditures from treatment of wastewater in waste treatment plant are included as well as relevant infrastructure of the plant. Emissions from any sludge digestion, biogas generation and utilization (heeding specific wastewater composition) are also included. Waste-specific direct emissions of untreated wastewater and required territory-specific infrastructure for sewers are not contained within this dataset but instead in the regional market datasets for this wastewater.

## Geography
The site has mean annual temperature (MAT) of 9.5 degC, mean annual precipitation (MAP) of 1483.00559816076 mm/year, mean annual actual evaporation (EAT) of 528.63778611689 mm/year. In the WWT plant, 0% of its water input are lost due to evaporation from pools, 0.0577% of water is *gained* from organic mass degradation, and 0.127% is removed off site via sludge disposal. (References: UN data, 2020. Precipitation, Environment Statistics Database, United Nations Statistics Division Available at: http://data.un.org/Data.aspx?q=precipitation&d=ENV&f=variableID%3a6; World Bank, 2022. Surface area (sq.km), World Bank Group Available at: https://data.worldbank.org/indicator/AG.SRF.TOTL.K2; MeteoSwiss, 2022. Data on Swiss temperature mean, Federal Department of Home Affairs FDHA. Federal Office of Meteorology and Climatology. Swiss Climate Available at: https://www.MeteoSwiss.admin.ch/home/climate/swiss-climate-in-detail/Swiss-temperature-mean/Data-on-the-Swiss-temperature-mean.html?query=TEMPERATURE+DATA&topic=/content/MeteoSwiss/tags/topics/klima&pageIndex=0&tab=search_tab; Doka G.,2021. A model for composition-specific life cycle inventories of regionalised wastewater fates, Zurich, Switzerland. http://www.doka.ch/publications.htm)

## Technology
This activity represents the treatment of a specific wastewater in a WWT plant (while direct emissions and sewering are heeded in the upstream market dataset for this wastewater). The size of the treatment plant infrastructure is for a national average territory situation. The assumed size of the WWTP treats 90.6 Mio m3 per year. The mixture of WWTP with one, two, or three stages is 0%-11.2%-88.8%. The actual, waste-specific oxygen requirement in the biological stages is 0.8767kg O. Generated waste-specific raw sludge is treated with anaerobic digestion. The digestion process produces 844.6 litres of biogas with an energy content of 19.55MJ. 23.6% of the biogas is utilized for energy. The remainder is flared. The gross electric efficiency is 26.564%. The gross thermal efficiency is 47.853%. After digestion, the remaining total sludge mass (dry matter) is 0.7751kg DM.

## Reference product
- iron scrap, sorted, pressed: 1 kg; By-product classification Recyclable; CPC 39310: Slag, dross, scalings and other waste from the manufacture of iron or steel; lognormal variance with pedigree 0.3109, pedigree (1,1,1,1,1)
  scrap output from used infrastructure for wastewater treatment plant.
  Uncertainty: Uncertainty calculated from wastewater technosphere fate uncertainty and treatment infrastructure uncertainty.
  production volume 2.48715e-7 kg
    Calculated in proportion to wastewater reference product.
  property price 0.175 EUR2005
    Temporary price data. Calculated as 90% of purchasers price based on: 2005 import and export prices (total trades (USD) divided by total weight (kg) in biggest economies of the world: EU27, USA, Brasil, China, India, Japan and Russia) from UN Commodity Trade Statistics Database (http://data.un.org/Explorer.aspxDatabase [Accessed 2011.06.20]). Commodity: Waste or scrap, of cast iron
  properties: carbon allocation 0 kg, carbon content 0, carbon content, fossil 0, carbon content, non-fossil 0, dry mass 1 kg, water content 0, water in wet mass 0 kg, wet mass 1 kg

## Inputs from technosphere
- aluminium, wrought alloy: 0.000128982 kg
- argon, liquid: 2.36487e-8, 1.12263e-7 kg (2 suppliers, which the file names only by identifier); sum of these 1.35912e-7 kg
- cable, ribbon cable, 20-pin, with plugs: 1.32062e-5 kg
- chemical, inorganic: 8.06646e-7 kg
- chemical, organic: 1.0773e-6 kg
- copper, cathode: 2.62204e-6 kg
- diethyl ether, without water, in 99.95% solution state: 2.91346e-7, 6.59569e-8 kg (2 suppliers, which the file names only by identifier); sum of these 3.57303e-7 kg
- electricity, medium voltage: 0.00477003 kWh
- ethanol, without water, in 99.7% solution state, from ethylene: 5.52481e-8, 1.2302e-7 kg (2 suppliers, which the file names only by identifier); sum of these 1.78269e-7 kg
- glass tube, borosilicate: 0.0001594 kg
- hazardous waste, for incineration: -1.75309e-5, -8.43056e-6, -2.2037e-7 kg (3 suppliers, which the file names only by identifier); sum of these -2.61819e-5 kg
- hazardous waste, for underground deposit: -9.73055e-10, -6.2677e-11 kg (2 suppliers, which the file names only by identifier); sum of these -1.03573e-9 kg
- heat, district or industrial, natural gas: 1.45786e-6 MJ
- inert waste, for final disposal: -3.79208e-11, -5.82477e-9 kg (2 suppliers, which the file names only by identifier); sum of these -5.8627e-9 kg
- krypton, gaseous: 2.4295e-7 kg
- lead: 4.10824e-6 kg
- lead in car shredder residue: -4.6816e-12, -3.09884e-10 kg (2 suppliers, which the file names only by identifier); sum of these -3.14566e-10 kg
- mercury: 1.53625e-8 kg
- polycarbonate: 0.000438924 kg
- polyethylene terephthalate, granulate, amorphous: 0.000105498 kg
- polymethyl methacrylate, sheet: 0.00291463 kg
- printed wiring board mounting facility: 8.08862e-10 unit
- spent activated carbon with mercury: -3.54993e-12 kg
- steel, chromium steel 18/8, hot rolled: 9.70246e-5 kg
- synthetic rubber: 2.31401e-6 kg
- waste paperboard: -4.6721e-10, -3.04721e-10, -5.68364e-8, -3.05957e-9, -7.51388e-9, -1.64616e-10, -1.68823e-9, -4.08532e-11 kg (8 suppliers, which the file names only by identifier); sum of these -7.00755e-8 kg
- waste plastic, industrial electronics: -8.79351e-8, -5.82065e-6 kg (2 suppliers, which the file names only by identifier); sum of these -5.90858e-6 kg
- waste polyethylene: -4.27186e-7, -1.1195e-8, -2.99054e-6, -2.8543e-8, -2.15866e-9, -1.17893e-8, -4.76273e-9, -3.70235e-7 kg (8 suppliers, which the file names only by identifier); sum of these -3.84641e-6 kg
- waste polypropylene: -1.29677e-8, -1.00806e-6, -5.87749e-9, -8.1425e-6, -3.20992e-8, -7.77153e-8, -3.04812e-8, -1.16312e-6 kg (8 suppliers, which the file names only by identifier); sum of these -1.04728e-5 kg
- wastewater from liquid crystal display backlight production: -1.77887e-6, -0.000367848 m3 (2 suppliers, which the file names only by identifier); sum of these -0.000369627 m3

## Inputs from nature
- Water, unspecified natural origin [natural resource, in water]: 0.000739253 m3

## Emissions to nature
- Diethyl ether [air, urban air close to ground]: 3.56533e-7 kg
- Ethanol [air, urban air close to ground]: 1.78269e-7 kg
- Nitrogen oxides [air, urban air close to ground]: 0.000112428 kg
- Water [air, unspecified]: 4.50945e-5 m3
- Water [water, unspecified]: 0.000324532 m3
