# treatment of wastewater from PV cell production, wastewater treatment

Dataset: EcoSpold 2, unit process
Geography: RoW
Time period: 2010-01-01 to 2022-12-31
Technology level: current
Classification: ISIC rev.4 ecoinvent: 3700:Sewerage
Scenario: Business-as-Usual
System model: Allocation at the point of substitution
Generated by: Nikolia Stoikou
Database: ecoinvent
isCopyrightProtected: true

## General comment
This dataset represents the treatment of a wastewater, generated from an ordinary transforming activity. Purification in wastewater treatment of 'wastewater from PV cell production'. Recommended use of this dataset: to be used for wastewaters, generated from ordinary transforming activities, of equal or similar composition. Share of biogenic carbon in th The wastewater has a content of TOC: 0.2699 kg/m3, COD: 1.05224 kg/m3 and BOD: 0.50892 kg/m3. TOC is equal to C present in the wastewater, COD is calculated as TOC/0.2565 and BOD is calculated as COD/0.53034. Detailed elemental composition can be found in the properties of the wastewater treated. Share of biogenic carbon in the sludge: 0%.

## Included activities start
The activity starts with the wastewater being available at the gate of the treatment facility. Collection and transportation of the wastewater to the treatment plant is not included.

## Included activities end
The activity ends with the wastewater being treated and waste-specific emissions released to the environment. Expenditures from treatment of wastewater in waste treatment plant are included as well as relevant infrastructure of the plant. Emissions from any sludge digestion, biogas generation and utilization (heeding specific wastewater composition) are also included. Waste-specific direct emissions of untreated wastewater and required territory-specific infrastructure for sewers are not contained within this dataset but instead in the regional market datasets for this wastewater.

## Geography
The site has mean annual temperature (MAT) of 16.743579766537 degC, mean annual precipitation (MAP) of 1250.84108527132 mm/year, mean annual actual evaporation (EAT) of 460.58904958214 mm/year. In the WWT plant, 0% of its water input are lost due to evaporation from pools, 0.0133% of water is *gained* from organic mass degradation, and 0.0334% is removed off site via sludge disposal. (References: UN data, 2020. Precipitation, Environment Statistics Database, United Nations Statistics Division Available at: http://data.un.org/Data.aspx?q=precipitation&d=ENV&f=variableID%3a6; World Bank, 2022. Surface area (sq.km), World Bank Group Available at: https://data.worldbank.org/indicator/AG.SRF.TOTL.K2; Doka G.,2021. A model for composition-specific life cycle inventories of regionalised wastewater fates, Zurich, Switzerland. http://www.doka.ch/publications.htm)

## Technology
This is an inventory for the disposal of a selected wastewater in Global. The reference unit is 1 m3 wastewater input. This activity represents the treatment of a specific wastewater in a WWT plant (while direct emissions and sewering are heeded in the upstream market dataset for this wastewater). The size of the treatment plant infrastructure is for a supranational region average territory situation. The assumed size of the WWTP treats 82.2 Mio m3 per year. The mixture of WWTP with one, two, or three stages is 8.2%-41.2%-50.6%. The actual, waste-specific oxygen requirement in the biological stages is 0.2583504 kg O. The digestion process produces 31.920065 litres of biogas with an energy content of 0.64171305MJ. 60.5% of the biogas is utilized for energy. The remainder is flared. The gross electric efficiency is 26.564%. The gross thermal efficiency is 47.853%. After digestion, the remaining total sludge mass (dry matter) is 0.5793kg DM.

## Reference product
- iron scrap, sorted, pressed: 1 kg; By-product classification Recyclable; CPC 39310: Slag, dross, scalings and other waste from the manufacture of iron or steel; lognormal variance with pedigree 0.3611, pedigree (1,1,1,1,1)
  scrap output from used infrastructure for wastewater treatment plant.
  Uncertainty: Uncertainty calculated from wastewater technosphere fate uncertainty and treatment infrastructure uncertainty.
  production volume 486.424 kg
    Calculated in proportion to wastewater reference product.
  property price 0.175 EUR2005
    Temporary price data. Calculated as 90% of purchasers price based on: 2005 import and export prices (total trades (USD) divided by total weight (kg) in biggest economies of the world: EU27, USA, Brasil, China, India, Japan and Russia) from UN Commodity Trade Statistics Database (http://data.un.org/Explorer.aspxDatabase [Accessed 2011.06.20]). Commodity: Waste or scrap, of cast iron
  properties: carbon allocation 0 kg, carbon content 0, carbon content, fossil 0, carbon content, non-fossil 0, dry mass 1 kg, water content 0, water in wet mass 0 kg, wet mass 1 kg

## Inputs from technosphere
- acetic acid, without water, in 98% solution state: 2.96085e-6 kg
- aluminium alloy, AlMg3: 0.000756239 kg
- aluminium, wrought alloy: 7.07443e-6 kg
- ammonia, anhydrous, liquid: 3.84065e-7, 4.02541e-8, 3.92008e-7, 1.47941e-6, 1.97849e-7, 1.79951e-7, 4.25711e-6, 1.27173e-7 kg (8 suppliers, which the file names only by identifier); sum of these 7.05782e-6 kg
- argon, liquid: 2.6897e-5 kg
- cadmium telluride, semiconductor-grade: 1.14883e-5 kg
- calcium chloride: 2.25936e-5 kg
- carbon dioxide, liquid: 3.65047e-6, 1.69602e-8 kg (2 suppliers, which the file names only by identifier); sum of these 3.66743e-6 kg
- chemical, inorganic: 2.72965e-6 kg
- chromium: 1.48563e-6 kg
- copper, cathode: 1.52621e-6 kg
- electricity, medium voltage: 4.34778e-7, 5.8706e-7, 8.44304e-7, 1.76242e-7, 1.03231e-5, 0.00721785, 5.5753e-7, 2.08777e-7, 0.00513445, 0.00226958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 kWh (50 suppliers, which the file names only by identifier); sum of these 0.0413517 kWh
- ethanol, without water, in 99.7% solution state, from ethylene: 6.71357e-7 kg
- ethylvinylacetate, foil: 0.000179041 kg
- flat glass, uncoated: 1.07105e-5, 0.00254047 kg (2 suppliers, which the file names only by identifier); sum of these 0.00255118 kg
- glass fibre reinforced plastic, polyamide, injection moulded: 5.08227e-5 kg
- hazardous waste, for incineration: -6.88999e-5, -5.35171e-7, -1.3989e-8 kg (3 suppliers, which the file names only by identifier); sum of these -6.9449e-5 kg
- heat, district or industrial, natural gas: 0.000624929, 2.17427e-5, 0.00442026, 7.26362e-5 MJ (4 suppliers, which the file names only by identifier); sum of these 0.00513957 MJ
- heat, district or industrial, other than natural gas: 0.00115768, 5.36331e-7 MJ (2 suppliers, which the file names only by identifier); sum of these 0.00115821 MJ
- hydrochloric acid, without water, in 30% solution state: 4.77688e-5 kg
- hydrogen fluoride: 3.95066e-5 kg
- hydrogen peroxide, without water, in 50% solution state: 2.4312e-6, 1.04262e-8 kg (2 suppliers, which the file names only by identifier); sum of these 2.44162e-6 kg
- isopropanol: 8.36043e-5, 4.18901e-9 kg (2 suppliers, which the file names only by identifier); sum of these 8.36085e-5 kg
- metallization paste, back side: 5.16428e-6 kg
- metallization paste, back side, aluminium: 7.5312e-5 kg
- metallization paste, front side: 7.74632e-6 kg
- multi-Si wafer: 0.000627896 m2
- multi-Si wafer, ribbon: 5.9776e-5 m2
- municipal solid waste: -1.89691e-9, -1.11441e-7, -6.83052e-10, -5.65843e-5, -4.77973e-10 kg (5 suppliers, which the file names only by identifier); sum of these -5.66987e-5 kg
- nitric acid, without water, in 50% solution state: 8.91946e-7, 1.0811e-7, 1.32529e-6, 3.29576e-6, 4.28603e-6, 1.57915e-6, 5.43127e-6, 1.33406e-8, 9.98183e-6, 1.23473e-5 kg (10 suppliers, which the file names only by identifier); sum of these 3.92601e-5 kg
- nitrogen, liquid: 0.00197521, 1.82476e-7 kg (2 suppliers, which the file names only by identifier); sum of these 0.0019754 kg
- oxygen, liquid: 0.000106731 kg
- phosphoric acid, fertiliser grade, without water, in 70% solution state: 8.03747e-6 kg
- phosphorus oxychloride: 1.67046e-6 kg
- photovoltaic cell factory: 4.18924e-10 unit
- photovoltaic panel factory: 1.88651e-9 unit
- polystyrene, expandable: 4.26485e-7 kg
- section bar extrusion, aluminium: 0.000756239 kg
- silicone product: 4.49209e-7, 5.62779e-5 kg (2 suppliers, which the file names only by identifier); sum of these 5.67271e-5 kg
- single-Si wafer, photovoltaic: 0.000423327 m2
- sodium chloride, powder: 2.13648e-5 kg
- sodium hydroxide, without water, in 50% solution state: 0.000176022 kg
- sodium silicate, spray powder, 80%: 7.83241e-5 kg
- solar glass, low-iron: 0.00319503 kg
- solvent, organic: 1.50195e-6 kg
- steel, chromium steel 18/8: 5.2773e-6 kg
- sulfuric acid: 1.84824e-5, 5.2623e-8 kg (2 suppliers, which the file names only by identifier); sum of these 1.8535e-5 kg
- synthetic rubber: 1.33412e-5 kg
- tap water: 0.00094303, 0.037653 kg (2 suppliers, which the file names only by identifier); sum of these 0.038596 kg
- tetrafluoroethylene: 3.3051e-6 kg
- titanium dioxide: 1.48477e-9 kg
- waste, from silicon wafer production, inorganic: -0.000288764 kg
- wastewater from PV cell production: -0.000246902, -2.17441e-9 m3 (2 suppliers, which the file names only by identifier); sum of these -0.000246904 m3
- water, completely softened: 0.0615363, 0.0822069 kg (2 suppliers, which the file names only by identifier); sum of these 0.143743 kg

## Inputs from nature
- Water, cooling, unspecified natural origin [natural resource, in water]: 0.00104576 m3

## Emissions to nature
- Aluminium III [air, urban air close to ground]: 8.09068e-7 kg
- Cadmium II [air, urban air close to ground]: 2.65917e-10 kg
- Carbon dioxide, fossil [air, urban air close to ground]: 3.66743e-6 kg
- Carbon monoxide, fossil [air, urban air close to ground]: 1.98135e-8 kg
- Ethane, 1,1,1,2-tetrafluoro-, HFC-134a [air, urban air close to ground]: 4.04177e-9 kg
- Ethane, hexafluoro-, HFC-116 [air, urban air close to ground]: 1.24221e-7 kg
- Hydrochloric acid [air, urban air close to ground]: 2.78867e-7 kg
- Hydrogen fluoride [air, urban air close to ground]: 5.07819e-9 kg
- Lead II [air, urban air close to ground]: 8.09068e-7 kg
- Methane, tetrafluoro-, R-14 [air, urban air close to ground]: 2.59345e-7 kg
- Methane, trifluoro-, HFC-23 [air, urban air close to ground]: 6.88755e-10 kg
- NMVOC, non-methane volatile organic compounds [air, urban air close to ground]: 0.000202696 kg
- Nitric acid [air, urban air close to ground]: 4.6211e-8 kg
- Nitrogen oxides [air, urban air close to ground]: 4.4981e-7 kg
- Particulate Matter, < 2.5 um [air, urban air close to ground]: 2.78867e-6 kg
- Silicon [air, urban air close to ground]: 7.61729e-8 kg
- Silver I [air, urban air close to ground]: 8.09068e-7 kg
- Sodium [air, urban air close to ground]: 5.07819e-8 kg
- Tin ion [air, urban air close to ground]: 8.09068e-7 kg
- Water [air, unspecified]: 0.000426793 m3
- Water [air, urban air close to ground]: 1.9314e-5 m3
- BOD5, Biological Oxygen Demand [water, unspecified]: 1.50405e-7 kg
- COD, Chemical Oxygen Demand [water, unspecified]: 5.06643e-7 kg
- Cadmium II [water, unspecified]: 7.22288e-11 kg
- Copper ion [water, unspecified]: 3.92718e-10 kg
- DOC, Dissolved Organic Carbon [water, unspecified]: 1.87646e-7 kg
- Suspended solids, unspecified [water, unspecified]: 1.86809e-7 kg
- TOC, Total Organic Carbon [water, unspecified]: 1.87646e-7 kg
- Water [water, unspecified]: 0.000535087 m3
