# treatment of wastewater, average, wastewater treatment

Dataset: EcoSpold 2, unit process
Geography: CH
Time period: 2010-01-01 to 2022-12-31
Technology level: current
Classification: ISIC rev.4 ecoinvent: 3700:Sewerage
Scenario: Business-as-Usual
System model: Allocation at the point of substitution
Generated by: Nikolia Stoikou
Database: ecoinvent
isCopyrightProtected: true

## General comment
This dataset represents the treatment of a wastewater, generated from an ordinary transforming activity. Purification in wastewater treatment of 'wastewater, average'. Recommended use of this dataset: to be used for wastewaters, generated from ordinary transforming activities, of equal or similar composition. The wastewater has a content of TOC: 0.1091 kg/m3, COD: 0.42534 kg/m3 and BOD: 0.20572 kg/m3. TOC is equal to C present in the wastewater, COD is calculated as TOC/0.2565 and BOD is calculated as COD/0.53034. Detailed elemental composition can be found in the properties of the wastewater treated. Share of biogenic carbon in the sludge: 100%.

## Included activities start
The activity starts with the wastewater being available at the gate of the treatment facility. Collection and transportation of the wastewater to the treatment plant is not included.

## Included activities end
The activity ends with the wastewater being treated and waste-specific emissions released to the environment. Expenditures from treatment of wastewater in waste treatment plant are included as well as relevant infrastructure of the plant. Emissions from any sludge digestion, biogas generation and utilization (heeding specific wastewater composition) are also included. Waste-specific direct emissions of untreated wastewater and required territory-specific infrastructure for sewers are not contained within this dataset but instead in the regional market datasets for this wastewater.

## Geography
The site has mean annual temperature (MAT) of 9.5 degC, mean annual precipitation (MAP) of 1483.00559816076 mm/year, mean annual actual evaporation (EAT) of 528.63778611689 mm/year. In the WWT plant, 0% of its water input are lost due to evaporation from pools, 0.00585% of water is *gained* from organic mass degradation, and 0.0224% is removed off site via sludge disposal. (References: UN data, 2020. Precipitation, Environment Statistics Database, United Nations Statistics Division Available at: http://data.un.org/Data.aspx?q=precipitation&d=ENV&f=variableID%3a6; World Bank, 2022. Surface area (sq.km), World Bank Group Available at: https://data.worldbank.org/indicator/AG.SRF.TOTL.K2; MeteoSwiss, 2022. Data on Swiss temperature mean, Federal Department of Home Affairs FDHA. Federal Office of Meteorology and Climatology. Swiss Climate Available at: https://www.MeteoSwiss.admin.ch/home/climate/swiss-climate-in-detail/Swiss-temperature-mean/Data-on-the-Swiss-temperature-mean.html?query=TEMPERATURE+DATA&topic=/content/MeteoSwiss/tags/topics/klima&pageIndex=0&tab=search_tab; Doka G.,2021. A model for composition-specific life cycle inventories of regionalised wastewater fates, Zurich, Switzerland. http://www.doka.ch/publications.htm)

## Technology
This activity represents the treatment of a specific wastewater in a WWT plant (while direct emissions and sewering are heeded in the upstream market dataset for this wastewater). The size of the treatment plant infrastructure is for a national average territory situation. The assumed size of the WWTP treats 90.6 Mio m3 per year. The mixture of WWTP with one, two, or three stages is 0%-11.2%-88.8%. The actual, waste-specific oxygen requirement in the biological stages is 0.1447kg O. Generated waste-specific raw sludge is treated with anaerobic digestion. The digestion process produces 95.04 litres of biogas with an energy content of 2.043MJ. 23.6% of the biogas is utilized for energy. The remainder is flared. The gross electric efficiency is 26.564%. The gross thermal efficiency is 47.853%. After digestion, the remaining total sludge mass (dry matter) is 0.1318kg DM.

## Reference product
- iron scrap, sorted, pressed: 1 kg; By-product classification Recyclable; CPC 39310: Slag, dross, scalings and other waste from the manufacture of iron or steel; lognormal variance with pedigree 0.3109, pedigree (1,1,1,1,1)
  scrap output from used infrastructure for wastewater treatment plant.
  Uncertainty: Uncertainty calculated from wastewater technosphere fate uncertainty and treatment infrastructure uncertainty.
  production volume 252349 kg
    Calculated in proportion to wastewater reference product.
  property price 0.175 EUR2005
    Temporary price data. Calculated as 90% of purchasers price based on: 2005 import and export prices (total trades (USD) divided by total weight (kg) in biggest economies of the world: EU27, USA, Brasil, China, India, Japan and Russia) from UN Commodity Trade Statistics Database (http://data.un.org/Explorer.aspxDatabase [Accessed 2011.06.20]). Commodity: Waste or scrap, of cast iron
  properties: carbon allocation 0 kg, carbon content 0, carbon content, fossil 0, carbon content, non-fossil 0, dry mass 1 kg, water content 0, water in wet mass 0 kg, wet mass 1 kg

## Inputs from technosphere
- 1,1-difluoroethane, HFC-152a: 3.09347e-8 kg
- 1-butanol: 2.63432e-9 kg
- 1-propanol: 1.76369e-10 kg
- Distiller's Dried Grains with Solubles: -0.000177999 kg
- EUR-flat pallet: 3.60118e-7, 1.6369e-7 unit (2 suppliers, which the file names only by identifier); sum of these 5.23807e-7 unit
- NOx retained, by selective catalytic reduction: 1.70607e-7 kg
- [thio]carbamate-compound: 2.90615e-9 kg
- acetic acid, without water, in 98% solution state: 0.000156132 kg
- acetone, liquid: 2.80831e-10 kg
- acetylene: 6.42154e-10, 3.04839e-9 kg (2 suppliers, which the file names only by identifier); sum of these 3.69054e-9 kg
- acrylic acid: 5.38701e-9, 2.55728e-8 kg (2 suppliers, which the file names only by identifier); sum of these 3.09598e-8 kg
- acrylic binder, with water, in 54% solution state: 2.82272e-8, 1.33998e-7 kg (2 suppliers, which the file names only by identifier); sum of these 1.62225e-7 kg
- acrylic dispersion, with water, in 58% solution state: 1.91851e-9 kg
- acrylic varnish, with water, in 53% solution state: 1.17803e-6 kg
- acrylonitrile-butadiene-styrene copolymer: 6.63571e-7 kg
- activated bentonite: 3.88069e-8 kg
- activated carbon, granular: 4.36428e-7 kg
- activated silica: 1.98519e-8 kg
- alkyd paint, white, without solvent, in 60% solution state: 5.07834e-9, 2.41075e-8 kg (2 suppliers, which the file names only by identifier); sum of these 2.91858e-8 kg
- alkylbenzene sulfonate, linear, petrochemical: 2.31171e-11 kg
- aluminium alloy, AlMg3: 3.12806e-8 kg
- aluminium casting facility: 2.8025e-15 unit
- aluminium hydroxide: 2.50018e-6 kg
- aluminium oxide, non-metallurgical: 9.09008e-6, 5.36924e-5 kg (2 suppliers, which the file names only by identifier); sum of these 6.27824e-5 kg
- aluminium scrap, new: -7.51737e-6, -7.51737e-6 kg (2 suppliers, which the file names only by identifier); sum of these -1.50347e-5 kg
- aluminium scrap, post-consumer: -3.79281e-11 kg
- aluminium sulfate, powder: 2.74915e-10, 2.51034e-6 kg (2 suppliers, which the file names only by identifier); sum of these 2.51061e-6 kg
- aluminium sulfate, without water, in 4.33% aluminium solution state: 3.23897e-8 kg
- aluminium, cast alloy: 5.43873e-7 kg
- aluminium, primary, ingot: 1.29434e-5, 2.35021e-6, 2.31175e-8 kg (3 suppliers, which the file names only by identifier); sum of these 1.53167e-5 kg
- aluminium, wrought alloy: 1.15298e-7 kg
- ammonia, anhydrous, liquid: 4.52386e-6, 4.7415e-7, 1.10396e-5, 4.54991e-6, 1.74259e-5, 2.33044e-6, 2.11962e-6, 5.01441e-5, 1.49796e-6 kg (9 suppliers, which the file names only by identifier); sum of these 9.41056e-5 kg
- ammonium bicarbonate: 0.00401002, 0.000844725 kg (2 suppliers, which the file names only by identifier); sum of these 0.00485474 kg
- ammonium carbonate: 4.19652e-7, 2.07249e-7 kg (2 suppliers, which the file names only by identifier); sum of these 6.26901e-7 kg
- ammonium chloride: 5.34147e-9 kg
- ammonium nitrate: 4.77933e-6, 3.20469e-5, 3.67343e-6, 1.24702e-5 kg (4 suppliers, which the file names only by identifier); sum of these 5.29699e-5 kg
- ammonium sulfate: 0.00263521, 0.00858661 kg (2 suppliers, which the file names only by identifier); sum of these 0.0112218 kg
- anode, for metal electrolysis: 9.68222e-6 kg
- antimony: 2.49104e-8 kg
- application of plant protection product, by field sprayer: 6.41543e-9 ha
- average incineration residue: -4.67846e-6 kg
- barite: 1.99718e-6 kg
- barium carbonate: 6.49604e-10 kg
- barley grain: 0.000481125 kg
- barley grain, Swiss integrated production: 0.000268894 kg
- barley grain, feed: 1.25234e-5 kg
- bauxite: 0.000193637 kg
- bentonite: 2.42622e-6 kg
- benzaldehyde: 1.41026e-6, 6.96466e-7 kg (2 suppliers, which the file names only by identifier); sum of these 2.10672e-6 kg
- biowaste: -0.000254163, -3.90396e-5 kg (2 suppliers, which the file names only by identifier); sum of these -0.000293203 kg
- bipyridylium-compound: 1.4243e-8 kg
- bisphenol A, powder: 0.000236623 kg
- blast furnace sludge: -2.73152e-5, -1.59765e-5, -0.000179854, -4.05881e-6 kg (4 suppliers, which the file names only by identifier); sum of these -0.000227204 kg
- blasting: 7.10856e-5 kg
- boric acid, anhydrous, powder: 7.0871e-8 kg
- brass: 2.15978e-8, 1.08532e-10 kg (2 suppliers, which the file names only by identifier); sum of these 2.17064e-8 kg
- brazing solder, cadmium free: 1.89937e-10 kg
- building, hall: 1.62636e-7 m2
- building, multi-storey: 2.39267e-8, 5.2688e-9 m3 (2 suppliers, which the file names only by identifier); sum of these 2.91955e-8 m3
- butane: 2.0308e-10 kg
- cable, unspecified: 1.87305e-8 kg
- calcium chloride: 1.24871e-6, 1.90571e-9 kg (2 suppliers, which the file names only by identifier); sum of these 1.25061e-6 kg
- calcium nitrate: 1.63405e-6 kg
- carbon black: 8.42852e-10 kg
- carbon dioxide, liquid: 0.000146177, 3.07706e-5 kg (2 suppliers, which the file names only by identifier); sum of these 0.000176947 kg
- carbon disulfide: 1.38579e-6 kg
- cast iron: 3.20371e-6 kg
- cellulose fibre: 1.74753e-6 kg
- cement, Portland: 2.10702e-5 kg
- cement, unspecified: 2.27341e-8, 8.5297e-11, 5.57924e-11, 3.20656e-11, 2.25749e-9, 5.94428e-10, 7.086e-11, 3.62246e-10, 1.36769e-9 kg (9 suppliers, which the file names only by identifier); sum of these 2.756e-8 kg
- ceramic tile: 1.01391e-7 kg
- charcoal: 2.79196e-8 kg
- chemical factory, organics: 3.99977e-12, 1.06539e-13 unit (2 suppliers, which the file names only by identifier); sum of these 4.10631e-12 unit
- chemical, inorganic: 1.8088e-5 kg
- chemical, organic: 9.51538e-5 kg
- chlorine dioxide: 1.56414e-8, 3.29492e-9 kg (2 suppliers, which the file names only by identifier); sum of these 1.89363e-8 kg
- chlorine, gaseous: 1.84357e-6, 0.000444315 kg (2 suppliers, which the file names only by identifier); sum of these 0.000446158 kg
- chlorine, liquid: 2.09191e-6, 1.89836e-6 kg (2 suppliers, which the file names only by identifier); sum of these 3.99027e-6 kg
- chlorothalonil: 1.5531e-9 kg
- chromite ore concentrate: 0.00195573 kg
- chromium oxide, flakes: 7.53085e-8 kg
- citric acid: 0.00161825 kg
- clay: 3.50867e-10, 2.28582e-6 kg (2 suppliers, which the file names only by identifier); sum of these 2.28617e-6 kg
- clinker: 1.78844e-9, 4.14836e-10, 2.54594e-8, 7.9352e-9, 8.49066e-9, 1.29469e-10, 5.31804e-10, 3.18284e-10 kg (8 suppliers, which the file names only by identifier); sum of these 4.50681e-8 kg
- cobalt: 6.17103e-7 kg
- cobalt hydroxide: 1.72437e-6 kg
- coke: 3.78139e-6, 0.0133245 MJ (2 suppliers, which the file names only by identifier); sum of these 0.0133283 MJ
- compost: 1.80192e-5 kg
- compressed air, 1000 kPa gauge: 7.81882e-8, 3.18164e-8 m3 (2 suppliers, which the file names only by identifier); sum of these 1.10005e-7 m3
- compressed air, 600 kPa gauge: 0.00135041 m3
- compressed air, 800 kPa gauge: 0.000472507, 0.000192273 m3 (2 suppliers, which the file names only by identifier); sum of these 0.00066478 m3
- concrete block: 5.79932e-9, 4.57857e-11, 1.01085e-10 kg (3 suppliers, which the file names only by identifier); sum of these 5.94619e-9 kg
- conveyor belt: 2.06618e-8 m
- copper cake: -0.000165986 kg
- copper oxide: 3.34061e-8 kg
- copper scrap, sorted, pressed: -7.59183e-11 kg
- copper sulfate: 5.55447e-10 kg
- copper, cathode: 3.85852e-7 kg
- corrugated board box: 4.66793e-8, 1.08348e-7, 3.90315e-6, 1.73881e-9 kg (4 suppliers, which the file names only by identifier); sum of these 4.05991e-6 kg
- cottonseed: 0.000186323, 2.89173e-7 kg (2 suppliers, which the file names only by identifier); sum of these 0.000186612 kg
- cyclic N-compound: 1.31951e-8 kg
- decarbonising waste: -7.41871e-5 kg
- diesel: 0.000138169, 2.57657e-9 kg (2 suppliers, which the file names only by identifier); sum of these 0.000138172 kg
- diesel, burned in agricultural machinery: 5.37857e-5 MJ
- diesel, burned in building machine: 0.00577055 MJ
- diesel, burned in diesel-electric generating set, 10MW: 0.00060758 MJ
- diesel, burned in diesel-electric generating set, 18.5kW: 1.65633e-5 MJ
- diethylene glycol: 3.83945e-7 kg
- dimethyldichlorosilane: 4.29478e-10 kg
- disodium disulphite: 8.73729e-8 kg
- dolomite: 4.58484e-6 kg
- drilling waste: -4.65342e-5 kg
- dust collector, electrostatic precipitator, for industrial use: 1.87712e-12 unit
- electricity, high voltage: 1.22233e-5 kWh
- electricity, low voltage: 3.35534e-7, 2.89976e-6, 9.10972e-8, 4.94023e-9, 3.0312e-7, 2.03576e-10, 1.42105e-9, 8.02836e-8, 4.08148e-7, 4.25491e-8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 kWh (104 suppliers, which the file names only by identifier); sum of these 0.196237 kWh
- electricity, medium voltage: 2.77676e-5, 3.74933e-5, 1.45817e-5, 5.39224e-5, 1.12559e-5, 4.10395e-5, 0.00433973, 3.34733e-8, 0.000659396, 3.92305e-6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 kWh (144 suppliers, which the file names only by identifier); sum of these 0.0323361 kWh
- electricity, medium voltage, cobalt industry: 0.107935 kWh
- electronics, for control units: 8.18197e-8 kg
- energy and auxilliary inputs, metal working factory: 4.25483e-15, 9.48818e-16 kg (2 suppliers, which the file names only by identifier); sum of these 5.20365e-15 kg
- enzymes: 9.52965e-10 kg
- epichlorohydrin: 6.44721e-5 kg
- epoxy resin, liquid: 1.82127e-8, 3.83657e-9 kg (2 suppliers, which the file names only by identifier); sum of these 2.20492e-8 kg
- establishing orchard: 4.38464e-6 unit
- esterquat: 2.36028e-12, 4.6985e-12 kg (2 suppliers, which the file names only by identifier); sum of these 7.05877e-12 kg
- ethanol fermentation plant: 8.57552e-14 unit
- ethanol, without water, in 99.7% solution state, from ethylene: 2.59688e-7, 5.78244e-7 kg (2 suppliers, which the file names only by identifier); sum of these 8.37931e-7 kg
- ethoxylated alcohol (AE11): 3.82956e-11 kg
- ethoxylated alcohol (AE7): 1.17482e-7, 5.57702e-7 kg (2 suppliers, which the file names only by identifier); sum of these 6.75184e-7 kg
- ethylene: 0.00179082 kg
- ethylene dichloride: 0.00014516 kg
- ethylene glycol: 3.11189e-5 kg
- ethylene glycol monoethyl ether: 7.04794e-9, 3.48068e-9 kg (2 suppliers, which the file names only by identifier); sum of these 1.05286e-8 kg
- ethylvinylacetate, foil: 2.17076e-8 kg
- excavation, hydraulic digger: 0.0012946 m3
- explosive, tovex: 5.95388e-6 kg
- extrusion, plastic film: 3.46628e-8 kg
- extrusion, plastic pipes: 0.000114356 kg
- feldspar: 4.57764e-5 kg
- ferrite: 4.13173e-8 kg
- fertilising, by broadcaster: 4.27695e-9 ha
- fibre and fabric waste, polyester: -1.12285e-6 kg
- fibre, cotton: 0.000201281 kg
- fibre, polyester: 3.32042e-5 kg
- fibre, silk, short: 3.91232e-6 kg
- flat glass factory: 1.60517e-14 unit
- flat glass, coated: 4.96666e-8, 1.00569e-7 kg (2 suppliers, which the file names only by identifier); sum of these 1.50235e-7 kg
- flat glass, uncoated: 3.48197e-8, 1.69088e-7 kg (2 suppliers, which the file names only by identifier); sum of these 2.03908e-7 kg
- fluorspar, 97% purity: 7.40476e-6 kg
- fly ash and scrubber sludge: -4.75253e-8, -4.01511e-6, -1.58379e-6 kg (3 suppliers, which the file names only by identifier); sum of these -5.64642e-6 kg
- formaldehyde: 3.1e-5, 4.15336e-9 kg (2 suppliers, which the file names only by identifier); sum of these 3.10042e-5 kg
- fruit tree seedling, for planting: 4.38464e-6 unit
- furnace, wood chips, with silo, 1000kW: 9.65118e-12 unit
- furnace, wood chips, with silo, 5000kW: 1.11067e-12, 7.66443e-13 unit (2 suppliers, which the file names only by identifier); sum of these 1.87711e-12 unit
- glass cullet, sorted: 0.000268254 kg
- glass fibre reinforced plastic, polyamide, injection moulded: 4.06998e-9 kg
- glyphosate: 4.24648e-9 kg
- gold: 1.97852e-12 kg
- gypsum, mineral: 1.67917e-6, 7.87382e-9, 3.53403e-9 kg (3 suppliers, which the file names only by identifier); sum of these 1.69058e-6 kg
- hard coal: 4.76135e-5, 6.31776e-5, 2.86469e-5, 1.76939e-5, 1.4238e-5, 2.92335e-5, 2.23041e-5, 4.2697e-5, 1.24319e-5, 6.7977e-6 kg (10 suppliers, which the file names only by identifier); sum of these 0.000284834 kg
- hazardous waste, for incineration: -2.08941e-5, -0.0915175, -0.00239221 kg (3 suppliers, which the file names only by identifier); sum of these -0.0939306 kg
- hazardous waste, for underground deposit: -2.61904e-5, -4.35326e-7 kg (2 suppliers, which the file names only by identifier); sum of these -2.66257e-5 kg
- heat and power co-generation unit, 6400kW thermal, building: 1.14661e-11 unit
- heat and power co-generation unit, 6400kW thermal, common components for heat+electricity: 4.59127e-11 unit
- heat and power co-generation unit, 6400kW thermal, components for electricity only: 4.59127e-11 unit
- heat and power co-generation unit, organic Rankine cycle, 1000kW electrical: 1.11067e-12 unit
- heat, central or small-scale, natural gas: 3.84886e-6 MJ
- heat, central or small-scale, other than natural gas: 0.000102783 MJ
- heat, district or industrial, natural gas: 3.48832, 0.00652429, 0.0591014, 0.00555466, 7.90007e-7, 0.00130075, 0.00230007, 0.0342837, 6.92245e-5 MJ (9 suppliers, which the file names only by identifier); sum of these 3.59745 MJ
- heat, district or industrial, other than natural gas: 7.82686e-6, 3.78022e-6, 5.35442e-5, 7.11775e-6, 0.00128653, 1.28731e-9, 1.35315, 4.38557e-8, 0.00385153, 0.0125512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 MJ (11 suppliers, which the file names only by identifier); sum of these 1.37092 MJ
- heat, from steam, in chemical industry: 0.0106625, 3.34448e-5 MJ (2 suppliers, which the file names only by identifier); sum of these 0.0106959 MJ
- heavy fuel oil: 0.000171679, 1.4446e-6, 7.34409e-6, 9.52275e-6, 1.85322e-6, 2.4808e-6, 4.02852e-5 kg (7 suppliers, which the file names only by identifier); sum of these 0.00023461 kg
- hexane: 8.91611e-6 kg
- hydrochloric acid, without water, in 30% solution state: 6.33339e-5, 3.59093e-5 kg (2 suppliers, which the file names only by identifier); sum of these 9.92431e-5 kg
- hydrogen peroxide, without water, in 50% solution state: 2.69492e-6, 1.56622e-6 kg (2 suppliers, which the file names only by identifier); sum of these 4.26114e-6 kg
- hydrogen sulfide: 4.9496e-5, 1.04265e-5 kg (2 suppliers, which the file names only by identifier); sum of these 5.99225e-5 kg
- hydrogen, liquid: 2.55976e-6, 9.66821e-6 kg (2 suppliers, which the file names only by identifier); sum of these 1.2228e-5 kg
- ilmenite, 54% titanium dioxide: 0.000174279 kg
- industrial machine, heavy, unspecified: 5.35031e-12, 2.6423e-12 kg (2 suppliers, which the file names only by identifier); sum of these 7.99261e-12 kg
- inert waste: -0.00729696, -6.28465e-5, -0.0257208 kg (3 suppliers, which the file names only by identifier); sum of these -0.0330807 kg
- inert waste, for final disposal: -4.25987e-6, -0.000654332 kg (2 suppliers, which the file names only by identifier); sum of these -0.000658592 kg
- injection moulding: 4.19096e-7 kg
- inorganic nitrogen fertiliser, as N: 1.48816e-7, 2.0115e-8, 3.84098e-8, 3.49645e-9, 2.24566e-8, 8.25631e-9, 7.89765e-9, 6.58558e-9, 2.51258e-8, 6.52549e-9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 kg (30 suppliers, which the file names only by identifier); sum of these 3.30472e-6 kg
- inorganic phosphorus fertiliser, as P2O5: 1.40598e-6, 7.97926e-9, 2.43397e-8, 2.23985e-8, 1.87572e-10, 7.08606e-10, 1.00872e-8, 3.68184e-10, 1.28919e-9, 1.50373e-7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 kg (28 suppliers, which the file names only by identifier); sum of these 2.23819e-6 kg
- inorganic potassium fertiliser, as K2O: 1.00211e-10, 3.46392e-9, 2.57226e-9, 5.33928e-8, 1.27115e-9, 2.89196e-10, 1.96065e-10, 7.4069e-10, 2.56518e-10, 1.73517e-9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 kg (28 suppliers, which the file names only by identifier); sum of these 3.39855e-7 kg
- iron scrap, sorted, pressed: 1.24816e-5 kg
- iron sulfate: 4.02704e-8, 1.98879e-8 kg (2 suppliers, which the file names only by identifier); sum of these 6.01583e-8 kg
- iron(III) chloride, without water, in 14% iron solution state: 3.81078e-10 kg
- iron(III) sulfate, without water, in 12.5% iron solution state: 1.58792e-9 kg
- irrigation: 5.84975e-7, 3.94254e-8, 2.36507e-8, 5.93125e-10, 1.05707e-7, 1.45303e-7, 3.1228e-6, 2.30621e-8, 1.38593e-6, 1.48281e-8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 m3 (15 suppliers, which the file names only by identifier); sum of these 1.69184e-5 m3
- isobutanol: 5.28768e-8, 1.27423e-7 kg (2 suppliers, which the file names only by identifier); sum of these 1.803e-7 kg
- isopropanol: 1.41013e-5, 2.9705e-6 kg (2 suppliers, which the file names only by identifier); sum of these 1.70718e-5 kg
- kaolin: 5.7581e-5 kg
- kerosene: 6.62659e-9, 1.1209e-6, 3.97065e-8, 2.29395e-7, 1.25971e-7, 8.41392e-9, 1.63065e-8, 1.07928e-8 kg (8 suppliers, which the file names only by identifier); sum of these 1.55811e-6 kg
- kraft paper: 3.43599e-8, 4.29039e-9 kg (2 suppliers, which the file names only by identifier); sum of these 3.86503e-8 kg
- leach residue from copper production: -0.00059433 kg
- lead: 1.62077e-7 kg
- lead concentrate: 1.13374e-7 kg
- light fuel oil: 3.97289e-6, 6.64797e-9, 3.94341e-7, 3.79165e-8, 8.89759e-7, 2.81782e-8, 2.6168e-8, 1.95389e-7 kg (8 suppliers, which the file names only by identifier); sum of these 5.55129e-6 kg
- lime: 0.00718485, 0.00511531 kg (2 suppliers, which the file names only by identifier); sum of these 0.0123002 kg
- lime, hydrated, loose weight: 2.79154e-7, 3.28864e-5 kg (2 suppliers, which the file names only by identifier); sum of these 3.31656e-5 kg
- lime, hydrated, packed: 1.95768e-8, 3.02055e-5 kg (2 suppliers, which the file names only by identifier); sum of these 3.02251e-5 kg
- lime, packed: 6.75709e-6, 0.00013796 kg (2 suppliers, which the file names only by identifier); sum of these 0.000144717 kg
- limestone residue: -0.00388982 kg
- limestone, crushed, for mill: 4.54304e-5, 1.82148e-7, 3.88925e-7 kg (3 suppliers, which the file names only by identifier); sum of these 4.60015e-5 kg
- limestone, crushed, washed: 0.000887706, 7.5691e-6 kg (2 suppliers, which the file names only by identifier); sum of these 0.000895275 kg
- limestone, unprocessed: 6.0801e-9, 6.29443e-11, 1.53936e-7 kg (3 suppliers, which the file names only by identifier); sum of these 1.60079e-7 kg
- liquefied petroleum gas: 1.27127e-9 kg
- liquid manure storage and processing facility: 2.45786e-7 m3
- lithium fluoride: 4.29478e-10 kg
- lubricating oil: 9.15385e-5, 1.02516e-5 kg (2 suppliers, which the file names only by identifier); sum of these 0.00010179 kg
- magnesium: 3.88867e-11 kg
- magnesium oxide: 2.99917e-5 kg
- maize grain: 0.000150155, 1.0485e-6, 0.00238367 kg (3 suppliers, which the file names only by identifier); sum of these 0.00253487 kg
- maize grain, Swiss integrated production: 0.000193526 kg
- maize grain, feed: 4.89228e-7, 4.13056e-5 kg (2 suppliers, which the file names only by identifier); sum of these 4.17948e-5 kg
- maize starch: 1.24e-6 kg
- mandarin: 0.00102356 kg
- manganese: 1.49308e-6 kg
- manganese dioxide: 7.79038e-9 kg
- manganese sulfate: 1.4165e-7 kg
- manganese(III) oxide: 3.04814e-8 kg
- mango: 6.45557e-6 kg
- manure, solid, cattle: 3.79364e-6 kg
- meat and bone meal: 1.85906e-11, 3.13446e-14 kg (2 suppliers, which the file names only by identifier); sum of these 1.8622e-11 kg
- melamine formaldehyde resin: 3.43354e-6 kg
- metal working factory: 5.20365e-15 unit
- methanol: 4.69196e-7 kg
- methyl ethyl ketone: 3.3514e-8, 1.26466e-8 kg (2 suppliers, which the file names only by identifier); sum of these 4.61606e-8 kg
- methylcyclopentane: 6.18695e-8 kg
- methylene diphenyl diisocyanate: 1.1213e-6 kg
- mine infrastructure, bauxite: 7.11035e-14 unit
- mine infrastructure, iron: 6.14502e-15 unit
- mine infrastructure, open cast, non-ferrous metal: 9.55783e-13 unit
- mine infrastructure, underground, non-ferrous metal: 1.2109e-13 unit
- molybdenum: 4.20725e-9 kg
- monoammonium phosphate: 1.00623e-5 kg
- mulberry leaves: 0.000117494 kg
- municipal solid waste: -8.13099e-7, -7.28155e-5, -1.80445e-7, -2.03296e-10, -0.549083, -1.20936e-8, -2.37529e-5, -8.46266e-9 kg (8 suppliers, which the file names only by identifier); sum of these -0.549181 kg
- municipal waste collection service by 21 metric ton lorry: 2.63542e-7 metric ton*km
- naphtha: 3.0666e-6, 0.000144565, 2.34469e-5, 6.35964e-6, 2.44846e-7, 1.01046e-6, 3.2274e-5 kg (7 suppliers, which the file names only by identifier); sum of these 0.000210968 kg
- natural gas, high pressure: 2.20411e-8, 9.30359e-9, 5.32842e-8, 1.58127e-8, 8.94538e-7, 9.14289e-8, 3.7578e-7, 9.98021e-9, 2.94502e-10, 3.54382e-8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 m3 (29 suppliers, which the file names only by identifier); sum of these 0.000218357 m3
- natural gas, low pressure: 2.12816e-5, 7.64228e-6, 6.38626e-6, 1.6576e-5, 1.56914e-5, 0.000326065, 1.60453e-5, 1.39401e-5, 3.07814e-6, 0.000149767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 m3 (14 suppliers, which the file names only by identifier); sum of these 0.000603787 m3
- nickel smelter slag: -0.00507155 kg
- nickel, class 1: 3.30042e-10 kg
- nitric acid, without water, in 50% solution state: 2.76098e-7, 3.59183e-6, 4.10239e-7, 1.02019e-6, 1.32672e-6, 4.88821e-7, 5.23718e-7, 4.43227e-7, 4.08721e-7, 2.22565e-6 kg (10 suppliers, which the file names only by identifier); sum of these 1.07152e-5 kg
- nitrile-compound: 3.63764e-9 kg
- nitrogen, liquid: 3.38576e-8, 0.000141269, 0.000289047 kg (3 suppliers, which the file names only by identifier); sum of these 0.00043035 kg
- non-ferrous metal smelter: 5.55002e-15 unit
- non-ionic surfactant: 4.16831e-6 kg
- non-sulfidic overburden, off-site: -4.13107 kg
- non-sulfidic tailing, off-site: -0.0197329 kg
- nylon 6: 5.52204e-9, 2.7271e-9 kg (2 suppliers, which the file names only by identifier); sum of these 8.24914e-9 kg
- oat grain: 0.000110699 kg
- oil mill: 2.95362e-12 unit
- operation, housing system, pig, fully-slatted floor, per pig place: 2.94811e-7 unit
- organophosphorus-compound, unspecified: 1.88083e-8 kg
- oxygen, liquid: 0.000133994, 5.14265e-5 kg (2 suppliers, which the file names only by identifier); sum of these 0.000185421 kg
- packaging film, low density polyethylene: 4.44286e-6 kg
- packaging, for fertilisers: 5.41175e-5 kg
- packaging, for pesticides: 5.68625e-7 kg
- palladium: 7.91406e-13 kg
- palm fruit bunch: 0.0132313 kg
- paper, newsprint: 8.25396e-8, 2.15282e-7 kg (2 suppliers, which the file names only by identifier); sum of these 2.97822e-7 kg
- paraffin: 4.52487e-6 kg
- pesticide, unspecified: 2.52689e-12 kg
- petrol, unleaded: 3.3065e-12, 3.80729e-10, 1.23696e-11, 1.44367e-10, 1.37096e-11, 3.31727e-12, 6.81112e-13 kg (7 suppliers, which the file names only by identifier); sum of these 5.58479e-10 kg
- petrol, unleaded, burned in machinery: 1.17932e-6 MJ
- petroleum: 1.543e-5, 2.75717e-5, 6.92834e-8, 5.96994e-5 kg (4 suppliers, which the file names only by identifier); sum of these 0.00010277 kg
- petroleum coke: 9.84682e-5 kg
- phenol: 9.89546e-6 kg
- phenolic resin: 4.90554e-6 kg
- phenyl isocyanate: 8.3524e-7 kg
- phosgene, liquid: 0.000102531 kg
- phosphate rock, beneficiated: 7.06227e-9, 1.55956e-6, 2.07044e-8, 2.07044e-8 kg (4 suppliers, which the file names only by identifier); sum of these 1.60803e-6 kg
- phosphoric acid, industrial grade, without water, in 85% solution state: 2.68945e-6 kg
- photovoltaic cell, multi-Si wafer: 2.0206e-8 m2
- photovoltaic panel factory: 8.66829e-14 unit
- photovoltaic slanted-roof installation, 3kWp, multi-Si, panel, mounted, on roof: 1.78904e-9 unit
- pig iron: 1.01273e-7, 1.09339e-6 kg (2 suppliers, which the file names only by identifier); sum of these 1.19467e-6 kg
- pitch: 7.28084e-12, 3.86372e-11, 1.10737e-9, 5.51583e-11, 4.87283e-9, 1.9045e-11, 8.61974e-10, 3.34172e-10 kg (8 suppliers, which the file names only by identifier); sum of these 7.29646e-9 kg
- planting tree: 4.38464e-6 unit
- plastic processing factory: 7.37615e-16 unit
- polyacrylamide: 1.01396e-6 kg
- polyethylene terephthalate, granulate, amorphous: 0.00394882 kg
- polyethylene, high density, granulate: 2.24209e-7 kg
- polyethylene, low density, granulate: 3.53745e-8 kg
- polyol: 2.05016e-7, 4.15131e-7 kg (2 suppliers, which the file names only by identifier); sum of these 6.20147e-7 kg
- polypropylene, granulate: 0.000104992 kg
- polystyrene, general purpose: 2.66864e-7 kg
- polystyrene, high impact: 1.31759e-6 kg
- polyurethane, rigid foam: 5.22569e-8, 1.05814e-7 kg (2 suppliers, which the file names only by identifier); sum of these 1.58071e-7 kg
- polyvinylchloride, bulk polymerised: 1.07152e-7 kg
- polyvinylchloride, suspension polymerised: 0.000107965 kg
- polyvinylfluoride, film: 2.39245e-9 kg
- portafer: 1.12843e-8 kg
- potassium carbonate: 1.49788e-6 kg
- potassium chloride: 2.6679e-6, 8.95586e-6 kg (2 suppliers, which the file names only by identifier); sum of these 1.16238e-5 kg
- potassium hydroxide: 1.24149e-6 kg
- potassium permanganate: 8.66421e-11 kg
- potassium sulfate: 5.46474e-7, 2.59418e-6 kg (2 suppliers, which the file names only by identifier); sum of these 3.14066e-6 kg
- poultry manure, dried: 1.52431e-6 kg
- powder coat, steel: 1.0667e-7 m2
- printed paper: 4.45964e-9 kg
- process-specific burdens, inert material landfill: 0.000137687, 1.16874e-6 kg (2 suppliers, which the file names only by identifier); sum of these 0.000138856 kg
- propane: 0.000169981 kg
- propane, burned in building machine: 2.38047e-5 MJ
- propylene: 0.000813248, 6.5413e-8, 3.41524e-6 kg (3 suppliers, which the file names only by identifier); sum of these 0.000816729 kg
- propylene glycol, liquid: 3.46425e-7, 1.71085e-7 kg (2 suppliers, which the file names only by identifier); sum of these 5.17509e-7 kg
- pulpwood, hardwood, measured as solid wood under bark: 1.53178e-7, 4.25564e-9 m3 (2 suppliers, which the file names only by identifier); sum of these 1.57434e-7 m3
- pulpwood, softwood, measured as solid wood under bark: 6.35695e-7, 7.76762e-9 m3 (2 suppliers, which the file names only by identifier); sum of these 6.43462e-7 m3
- purified terephthalic acid: 8.01089e-5 kg
- quicklime, in pieces, loose: 4.01592e-8, 6.64595e-13 kg (2 suppliers, which the file names only by identifier); sum of these 4.01598e-8 kg
- quicklime, milled, loose: 0.000598996, 0.000131904 kg (2 suppliers, which the file names only by identifier); sum of these 0.0007309 kg
- rape meal: 4.43257e-6 kg
- rape oil, crude: 4.55594e-12, 2.80166e-9 kg (2 suppliers, which the file names only by identifier); sum of these 2.80622e-9 kg
- recultivation, bauxite mine: 4.79949e-7 m2
- recultivation, iron mine: 8.03503e-7 m2
- refinery sludge: -2.80103e-6, -2.70034e-5, -1.28166e-7 kg (3 suppliers, which the file names only by identifier); sum of these -2.99326e-5 kg
- refractory, fireclay, packed: 2.27303e-6 kg
- refrigeration machine, R134a as refrigerant: 7.29646e-10 unit
- reinforcing steel: 3.25054e-5 kg
- residue from TiO2 production, chloride process: -4.57008e-6 kg
- residue from TiO2 production, sulfate process: -3.52812e-5 kg
- road vehicle factory: 1.28135e-15 unit
- rosin size, for paper production: 1.15784e-7 kg
- rutile, 95% titanium dioxide: 8.32754e-6 kg
- sawdust, wet, measured as dry mass: 1.80769e-7, 1.56764e-5 kg (2 suppliers, which the file names only by identifier); sum of these 1.58571e-5 kg
- sawnwood, softwood, dried (u=10%), planed: 1.65715e-8, 8.6111e-9 m3 (2 suppliers, which the file names only by identifier); sum of these 2.51826e-8 m3
- scrap aluminium: -1.96382e-7, -9.2138e-9, -4.135e-7 kg (3 suppliers, which the file names only by identifier); sum of these -6.19096e-7 kg
- scrap copper: -5.48499e-9, -1.16906e-7, -2.46157e-7 kg (3 suppliers, which the file names only by identifier); sum of these -3.68548e-7 kg
- scrap lead acid battery: -1.06033e-7 kg
- scrap steel: -1.56507e-8, -3.83631e-5, -1.23529e-5 kg (3 suppliers, which the file names only by identifier); sum of these -5.07317e-5 kg
- seal, natural rubber based: 2.9731e-10 kg
- section bar rolling, steel: 1.18932e-6 kg
- sewage sludge: -1.05116e-8 m3
- sewage sludge, dried: -9.43171e-7 kg
- sheet rolling, steel: 3.04992e-7 kg
- silica sand: 0.00034345 kg
- silicon carbide: 3.65305e-6 kg
- silicone product: 9.99907e-6 kg
- silver: 1.33379e-11 kg
- slab and siding, softwood, wet, measured as dry mass: 4.30454e-5, 5.52884e-7 kg (2 suppliers, which the file names only by identifier); sum of these 4.35983e-5 kg
- slaughterhouse waste: -1.51776e-6 kg
- soap: 1.66685e-7 kg
- soda ash, dense: 1.19794e-7 kg
- soda ash, light: 0.000123992 kg
- sodium borates: 1.9387e-5 kg
- sodium chloride, powder: 1.20201e-6 kg
- sodium dichromate: 6.35168e-11 kg
- sodium hydrogen sulfite: 5.59524e-12 kg
- sodium hydrosulfide: 6.48745e-9 kg
- sodium hydroxide, without water, in 50% solution state: 0.00041016 kg
- sodium hypochlorite, without water, in 15% solution state: 2.10839e-11, 1.00088e-10 kg (2 suppliers, which the file names only by identifier); sum of these 1.21172e-10 kg
- sodium metasilicate pentahydrate, 58% active substance, powder: 2.34442e-11, 4.74716e-11 kg (2 suppliers, which the file names only by identifier); sum of these 7.09159e-11 kg
- sodium methoxide: 1.19261e-7 kg
- sodium nitrite: 1.34165e-8, 6.60815e-9 kg (2 suppliers, which the file names only by identifier); sum of these 2.00247e-8 kg
- sodium percarbonate, powder: 1.51023e-5, 3.05802e-5 kg (2 suppliers, which the file names only by identifier); sum of these 4.56825e-5 kg
- sodium persulfate: 2.26903e-6 kg
- sodium phosphate: 2.94782e-12, 6.20969e-13 kg (2 suppliers, which the file names only by identifier); sum of these 3.56879e-12 kg
- sodium silicate, solid: 1.89367e-10, 3.83443e-10 kg (2 suppliers, which the file names only by identifier); sum of these 5.7281e-10 kg
- sodium silicate, without water, in 37% solution state: 7.082e-11, 3.4975e-11 kg (2 suppliers, which the file names only by identifier); sum of these 1.05795e-10 kg
- sodium sulfate, anhydrite: 4.15627e-6, 6.78865e-7 kg (2 suppliers, which the file names only by identifier); sum of these 4.83513e-6 kg
- sodium sulfide: 1.84142e-10 kg
- sodium tetrahydridoborate: 2.04759e-10 kg
- solar glass, low-iron: 2.18419e-7 kg
- solid manure loading and spreading, by hydraulic loader and spreader: 5.31795e-6 kg
- solvent, organic: 6.05621e-6 kg
- soybean meal: 7.88301e-6, 1.89818e-6 kg (2 suppliers, which the file names only by identifier); sum of these 9.7812e-6 kg
- soybean oil, crude: 5.1046e-6 kg
- soybean, feed: 4.08949e-6 kg
- soybean, organic: 0.00121694 kg
- spent solvent mixture: -2.89503e-5, -3.0554e-7, -1.30414e-5 kg (3 suppliers, which the file names only by identifier); sum of these -4.22972e-5 kg
- spodumene: 2.40266e-5 kg
- steam, in chemical industry: 0.00044115, 0.00248047 kg (2 suppliers, which the file names only by identifier); sum of these 0.00292162 kg
- steel, chromium steel 18/8: 2.56115e-5 kg
- steel, chromium steel 18/8, hot rolled: 1.42082e-6 kg
- steel, low-alloyed: 5.58738e-5 kg
- steel, low-alloyed, hot rolled: 7.65617e-6 kg
- steel, unalloyed: 1.09394e-6 kg
- stone wool factory: 1.49105e-13 unit
- stone wool, packed: 7.29646e-9 kg
- strontium carbonate: 2.29156e-9 kg
- sugar beet: 0.106314 kg
- sugar beet pulp: -0.0216902 kg
- sugar refinery: 1.66849e-12 unit
- sulfamic acid: 1.44356e-12 kg
- sulfidic tailings, from nickel mine operation: -0.00433481, -0.00121723, -0.000911471, -0.00377361 kg (4 suppliers, which the file names only by identifier); sum of these -0.0102371 kg
- sulfidic tailings, from zinc-lead mine operation: -6.1538e-10, -1.10529e-10, -8.66312e-11, -2.08512e-10, -3.14262e-11, -7.5877e-11, -3.53933e-10, -1.60716e-10 kg (8 suppliers, which the file names only by identifier); sum of these -1.64301e-9 kg
- sulfidic tailings, generic: -0.00659162 kg
- sulfite: 1.53087e-8, 3.09982e-8 kg (2 suppliers, which the file names only by identifier); sum of these 4.6307e-8 kg
- sulfite pulp, bleached: 2.94693e-9 kg
- sulfur: 6.77247e-6 kg
- sulfur dioxide, liquid: 4.17195e-6, 1.03847e-5 kg (2 suppliers, which the file names only by identifier); sum of these 1.45566e-5 kg
- sulfuric acid: 0.0025087, 0.000764496 kg (2 suppliers, which the file names only by identifier); sum of these 0.00327319 kg
- synthetic rubber: 1.22541e-6 kg
- tap water: 2.5596e-7, 0.0788947, 0.00200871, 8.00827e-5, 47.9258, 0.118969, 0.000149044, 0.111641, 5.25334e-5, 0.000402554 kg (10 suppliers, which the file names only by identifier); sum of these 48.238 kg
- tempering, flat glass: 2.18419e-7 kg
- tetraethyl orthosilicate: 4.436e-5 kg
- thermoforming of plastic sheets: 5.94004e-8 kg
- tin: 8.47521e-10 kg
- titanium dioxide: 4.98546e-7, 9.97092e-7 kg (2 suppliers, which the file names only by identifier); sum of these 1.49564e-6 kg
- titanium tetrachloride: 9.13267e-7 kg
- transport, freight train: 0.00181339, 4.27535e-8 metric ton*km (2 suppliers, which the file names only by identifier); sum of these 0.00181343 metric ton*km
- transport, freight, inland waterways, barge: 5.69653e-8, 5.81916e-5 metric ton*km (2 suppliers, which the file names only by identifier); sum of these 5.82485e-5 metric ton*km
- transport, freight, lorry 16-32 metric ton, EURO3: 3.02085e-8, 1.24867e-7, 2.80085e-7 metric ton*km (3 suppliers, which the file names only by identifier); sum of these 4.35161e-7 metric ton*km
- transport, freight, lorry 16-32 metric ton, EURO4: 0.000401454, 4.6773e-5 metric ton*km (2 suppliers, which the file names only by identifier); sum of these 0.000448227 metric ton*km
- transport, freight, lorry 3.5-7.5 metric ton, EURO3: 2.44884e-12 metric ton*km
- transport, freight, lorry >32 metric ton, EURO3: 1.5774e-8 metric ton*km
- transport, freight, lorry >32 metric ton, EURO4: 0.00270041, 0.00031461 metric ton*km (2 suppliers, which the file names only by identifier); sum of these 0.00301502 metric ton*km
- transport, freight, lorry, unspecified: 6.95598e-9 metric ton*km
- transport, freight, sea, bulk carrier for dry goods: 0.00740065 metric ton*km
- transport, freight, sea, container ship: 1.94633e-7 metric ton*km
- transport, tractor and trailer, agricultural: 5.54336e-6, 0.00106316 metric ton*km (2 suppliers, which the file names only by identifier); sum of these 0.00106871 metric ton*km
- trellis system, wooden poles, soft wood, tar impregnated: 2.28556e-8 ha
- trisodium phosphate: 1.5472e-8 kg
- urea: 1.3792e-5, 4.17405e-6, 5.27892e-7, 3.56434e-6 kg (4 suppliers, which the file names only by identifier); sum of these 2.20583e-5 kg
- urea formaldehyde resin: 1.56007e-5 kg
- used cable: -1.87305e-8 kg
- used lorry with refrigeration machine, 16 metric ton: -7.29646e-10 unit
- vegetable oil esterification facility: 1.43432e-15 unit
- vegetable oil, refined: 1.58815e-6 kg
- vinyl acetate: 9.29005e-8 kg
- vinyl chloride: 0.00131008 kg
- washing machine: 2.91781e-10 unit
- waste aluminium: -1.55876e-7 kg
- waste bulk iron, excluding reinforcement: -1.41842e-6, -6.82114e-7, -1.783e-8 kg (3 suppliers, which the file names only by identifier); sum of these -2.11837e-6 kg
- waste electric and electronic equipment: -5.99303e-8 kg
- waste emulsion paint, separated: -2.79762e-8 kg
- waste glass: -3.80671e-11, -6.28592e-10, -1.50569e-9, -1.63364e-8, -1.40479e-10, -3.10315e-8, -2.13325e-10, -1.53957e-7, -3.41591e-11 kg (9 suppliers, which the file names only by identifier); sum of these -2.03885e-7 kg
- waste glass sheet: -2.40955e-8, -6.13472e-10, -9.28488e-8 kg (3 suppliers, which the file names only by identifier); sum of these -1.17558e-7 kg
- waste gypsum: -0.000494792, -0.0104672, -0.00860075 kg (3 suppliers, which the file names only by identifier); sum of these -0.0195627 kg
- waste mineral oil: -1.81754e-6, -9.11934e-5, -3.49311e-5 kg (3 suppliers, which the file names only by identifier); sum of these -0.000127942 kg
- waste packaging paper: -2.43984e-8, -9.95912e-10, -1.52697e-9, -4.75792e-18, -5.51758e-9, -9.99949e-9, -1.3352e-10, -5.3801e-10 kg (8 suppliers, which the file names only by identifier); sum of these -4.31099e-8 kg
- waste paint: -7.18465e-11, -2.12212e-14, -7.07177e-12 kg (3 suppliers, which the file names only by identifier); sum of these -7.89395e-11 kg
- waste paint on metal: -1.70605e-7, -1.44815e-9 kg (2 suppliers, which the file names only by identifier); sum of these -1.72053e-7 kg
- waste paper, unsorted: -1.45601e-11, -1.45601e-11, -1.45601e-11 kg (3 suppliers, which the file names only by identifier); sum of these -4.36802e-11 kg
- waste paperboard: -1.12945e-8, -3.56775e-7, -7.36646e-9, -1.37399e-6, -7.39632e-8, -1.63367e-6, -3.9795e-9, -4.79899e-9, -6.99552e-5, -9.87604e-10 kg (10 suppliers, which the file names only by identifier); sum of these -7.34221e-5 kg
- waste plastic, mixture: -7.01665e-8, -3.54565e-10, -6.12927e-11, -7.8229e-10, -9.59264e-6, -5.9675e-5, -4.68825e-9, -1.83881e-9, -1.93642e-9 kg (9 suppliers, which the file names only by identifier); sum of these -6.93475e-5 kg
- waste polyethylene: -2.14213e-8, -5.61375e-10, -1.49961e-7, -1.43129e-9, -2.27865e-7, -1.08246e-10, -5.91174e-10, -2.38827e-10, -1.85655e-8 kg (9 suppliers, which the file names only by identifier); sum of these -4.20743e-7 kg
- waste polyethylene terephthalate: -2.41773e-13, -3.11018e-15, -7.69868e-15, -2.78963e-13, -1.40966e-15, -7.31061e-15, -1.9529e-12, -1.86392e-14 kg (8 suppliers, which the file names only by identifier); sum of these -2.5118e-12 kg
- waste polyethylene terephthalate, for recycling, sorted: 0.000999879 kg
- waste polyethylene, for recycling, sorted: 5.99629e-5 kg
- waste polypropylene: -1.2218e-9, -9.49777e-8, -5.53768e-10, -7.67174e-7, -3.02434e-9, -7.32222e-9, -2.87189e-9, -1.09588e-7 kg (8 suppliers, which the file names only by identifier); sum of these -9.86733e-7 kg
- waste polystyrene: -4.7041e-9, -1.25661e-6, -2.00128e-9, -1.79502e-7, -4.9538e-9, -9.07059e-10, -1.19936e-8, -1.55571e-7 kg (8 suppliers, which the file names only by identifier); sum of these -1.61625e-6 kg
- waste polyurethane foam: -1.57947e-8, -1.23891e-11 kg (2 suppliers, which the file names only by identifier); sum of these -1.58071e-8 kg
- waste polyvinylchloride: -1.16709e-10, -6.05263e-10, -2.57499e-10, -6.37392e-10, -1.54319e-9, -2.3096e-8, -2.00169e-8, -1.61685e-7 kg (8 suppliers, which the file names only by identifier); sum of these -2.07958e-7 kg
- waste polyvinylfluoride: -2.39245e-9 kg
- waste preparation facility: 1.75919e-12 unit
- waste rubber, unspecified: -1.95733e-8, -4.66256e-7, -4.66256e-7 kg (3 suppliers, which the file names only by identifier); sum of these -9.52085e-7 kg
- waste textile, soiled: -1.98336e-8, -2.96859e-10 kg (2 suppliers, which the file names only by identifier); sum of these -2.01305e-8 kg
- waste wood, untreated: -1.37932e-8, -1.26558e-7, -7.50994e-8, -2.01583e-5, -8.00537e-8, -2.39793e-6, -4.05411e-11, -1.16249e-10 kg (8 suppliers, which the file names only by identifier); sum of these -2.28518e-5 kg
- waste x-ray film: -3.18373e-6 kg
- waste yarn and waste textile: -1.10436e-5 kg
- wastewater from hard fibreboard production: -8.33311e-7 m3
- wastewater from lorry production: -2.86292e-11, -5.92018e-9 m3 (2 suppliers, which the file names only by identifier); sum of these -5.9488e-9 m3
- wastewater from particle board production: -2.47242e-8 m3
- wastewater from vegetable oil refinery: -4.46837e-11 m3
- wastewater, average: -0.00133977, -5.35156e-7, -7.01041e-6, -0.00199397, -0.0455895 m3 (5 suppliers, which the file names only by identifier); sum of these -0.0489307 m3
- wastewater, unpolluted: -0.000112925 m3
- water, completely softened: 0.000247731, 7.13574e-9, 9.5327e-9 kg (3 suppliers, which the file names only by identifier); sum of these 0.000247747 kg
- water, decarbonised: 0.0192824, 0.00256944, 0.0064732, 2.20672e-5, 0.0321099, 0.000126143, 0.0212851, 0.0163682, 0.0103631, 0.00307401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 kg (13 suppliers, which the file names only by identifier); sum of these 0.115156 kg
- water, deionised: 0.000946481, 0.262929, 0.84955 kg (3 suppliers, which the file names only by identifier); sum of these 1.11343 kg
- water, harvested from rainwater: 0.000144727 kg
- wax, lost-wax casting: 3.16897e-5 kg
- welding, arc, steel: 5.69144e-9 m
- wheat grain: 0.000249564, 1.328e-6 kg (2 suppliers, which the file names only by identifier); sum of these 0.000250892 kg
- wheat grain, Swiss integrated production: 0.000157439 kg
- wheat grain, feed: 3.04188e-6 kg
- whey: 1.50118e-7 kg
- wire drawing, copper: 2.44207e-9, 3.62325e-8 kg (2 suppliers, which the file names only by identifier); sum of these 3.86745e-8 kg
- wire drawing, steel: 1.68976e-9, 5.24294e-7 kg (2 suppliers, which the file names only by identifier); sum of these 5.25984e-7 kg
- wood ash mixture, pure: -1.32081e-6, -9.37294e-6, -1.68978e-5 kg (3 suppliers, which the file names only by identifier); sum of these -2.75916e-5 kg
- wood chips, dry, measured as dry mass: 0.000146799 kg
- wood chips, from post-consumer wood, measured as dry mass: 7.91445e-5 kg
- wood chips, wet, measured as dry mass: 6.91059e-6, 0.000113098 kg (2 suppliers, which the file names only by identifier); sum of these 0.000120009 kg
- wooden board factory, organic bonded boards: 1.2139e-16, 2.75014e-14 unit (2 suppliers, which the file names only by identifier); sum of these 2.76228e-14 unit
- xylene: 0.00185101 kg
- yarn, cotton: 7.43999e-5 kg
- zinc: 1.58371e-8 kg
- zinc coat, coils: 2.14878e-8 m2
- zinc concentrate: 1.01188e-5 kg
- zinc monosulfate: 2.91589e-8, 5.51971e-9 kg (2 suppliers, which the file names only by identifier); sum of these 3.46786e-8 kg
- zinc oxide: 2.59815e-7 kg
- zinc slag: -1.26865e-6 kg
- zircon: 2.00932e-5 kg

## Inputs from nature
- Aluminium [natural resource, in ground]: 0.000393282 kg
- Arsenic [natural resource, in ground]: 9.61786e-7 kg
- Boron [natural resource, in ground]: 0.00108315 kg
- Calcium [natural resource, in ground]: 6.05925e-5 kg
- Carbon dioxide, in air [natural resource, in air]: 0.00779638 kg
- Chromium [natural resource, in ground]: 0.000133163 kg
- Clay, unspecified [natural resource, in ground]: 3.84064 kg
- Cobalt [natural resource, in ground]: 4.46123e-5 kg
- Copper [natural resource, in ground]: 0.000942048 kg
- Energy, gross calorific value, in biomass [natural resource, biotic]: 0.000547555 MJ
- Energy, solar, converted [natural resource, in air]: 0.000582801 MJ
- Gangue [natural resource, in ground]: 0.312262 kg
- Gold [natural resource, in ground]: 2.88552e-11 kg
- Hafnium [natural resource, in ground]: 9.65444e-7 kg
- Iron [natural resource, in ground]: 0.0133101 kg
- Lead [natural resource, in ground]: 9.61786e-7 kg
- Magnesium [natural resource, in ground]: 0.000620532 kg
- Manganese [natural resource, in ground]: 7.18714e-5 kg
- Nickel [natural resource, in ground]: 0.000598074 kg
- Occupation, construction site [natural resource, land]: 6.86954e-9 m2*year
- Occupation, industrial area [natural resource, land]: 4.00766e-5 m2*year
- Occupation, mineral extraction site [natural resource, land]: 0.00192922 m2*year
- Occupation, permanent crop, irrigated [natural resource, land]: 0.000229174 m2*year
- Oxygen [natural resource, in air]: 0.000848148 kg
- Silicon [natural resource, in ground]: 0.00243586 kg
- Silver [natural resource, in ground]: 5.19394e-10 kg
- Sodium chloride [natural resource, in ground]: 0.0024729 kg
- Strontium [natural resource, in ground]: 0.00197732 kg
- Sulfur [natural resource, in ground]: 0.00767632 kg
- Tantalum [natural resource, in ground]: 6.77512e-7 kg
- Titanium [natural resource, in ground]: 6.31278e-5 kg
- Transformation, from forest, unspecified [natural resource, land]: 9.82947e-7 m2
- Transformation, from mineral extraction site [natural resource, land]: 1.96664e-7 m2
- Transformation, from pasture, man made [natural resource, land]: 2.87969e-7 m2
- Transformation, from permanent crop, irrigated [natural resource, land]: 1.14278e-5 m2
- Transformation, from unspecified [natural resource, land]: 1.69944e-5 m2
- Transformation, from unspecified, natural (non-use) [natural resource, land]: 5.99153e-8 m2
- Transformation, to industrial area [natural resource, land]: 1.06097e-6 m2
- Transformation, to mineral extraction site [natural resource, land]: 1.72643e-5 m2
- Transformation, to permanent crop, irrigated [natural resource, land]: 1.14278e-5 m2
- Transformation, to unspecified [natural resource, land]: 1.96664e-7 m2
- Water, cooling, unspecified natural origin [natural resource, in water]: 0.000199785 m3
- Water, lake [natural resource, in water]: 9.54849e-6 m3
- Water, river [natural resource, in water]: 1.77907e-5 m3
- Water, salt, ocean [natural resource, in water]: 1.50484e-7 m3
- Water, unspecified natural origin [natural resource, in ground]: 2.4523e-7 m3
- Water, unspecified natural origin [natural resource, in water]: 0.000954436 m3
- Water, well, in ground [natural resource, in water]: 2.83235e-5 m3
- Zinc [natural resource, in ground]: 1.92357e-6 kg
- Zirconium [natural resource, in ground]: 4.82722e-5 kg

## Emissions to nature
- 2-Propanol [air, unspecified]: 2.06823e-9 kg
- Acetaldehyde [air, unspecified]: 1.50411e-9 kg
- Acetaldehyde [air, urban air close to ground]: 3.19483e-9 kg
- Acetic acid [air, unspecified]: 6.17397e-8 kg
- Aluminium III [air, non-urban air or from high stacks]: 2.45145e-6 kg
- Ammonia [air, non-urban air or from high stacks]: 2.0058e-6 kg
- Ammonia [air, unspecified]: 5.90456e-7 kg
- Ammonia [air, urban air close to ground]: 1.30219e-7 kg
- Antimony ion [air, unspecified]: 4.35899e-13 kg
- Arsenic ion [air, non-urban air or from high stacks]: 3.43873e-10 kg
- Arsenic ion [air, unspecified]: 1.63709e-8 kg
- Arsenic ion [air, urban air close to ground]: 4.97098e-11 kg
- Benzene [air, unspecified]: 2.68665e-8 kg
- Benzene [air, urban air close to ground]: 4.37464e-8 kg
- Benzene, ethyl- [air, unspecified]: 7.7696e-11 kg
- Benzene, ethyl- [air, urban air close to ground]: 1.44215e-9 kg
- Benzene, hexachloro- [air, unspecified]: 1.8647e-17 kg
- Benzene, hexachloro- [air, urban air close to ground]: 3.46125e-16 kg
- Benzo(a)pyrene [air, unspecified]: 1.29494e-12 kg
- Benzo(a)pyrene [air, urban air close to ground]: 2.40359e-11 kg
- Bromine [air, unspecified]: 1.55392e-10 kg
- Bromine [air, urban air close to ground]: 2.98261e-9 kg
- Cadmium II [air, unspecified]: 3.31424e-11 kg
- Cadmium II [air, urban air close to ground]: 3.47974e-11 kg
- Calcium [air, non-urban air or from high stacks]: 1.71602e-6 kg
- Calcium [air, unspecified]: 1.80629e-8 kg
- Calcium [air, urban air close to ground]: 2.9081e-7 kg
- Carbon dioxide, fossil [air, non-urban air or from high stacks]: 0.00542974 kg
- Carbon dioxide, fossil [air, unspecified]: 0.00163446 kg
- Carbon dioxide, from soil or biomass stock [air, non-urban air or from high stacks]: 2.42109e-5 kg
- Carbon dioxide, non-fossil [air, non-urban air or from high stacks]: 7.80201e-8 kg
- Carbon dioxide, non-fossil [air, unspecified]: 0.000277116 kg
- Carbon dioxide, non-fossil [air, urban air close to ground]: 0.0138702 kg
- Carbon monoxide, fossil [air, non-urban air or from high stacks]: 9.9861e-6 kg
- Carbon monoxide, fossil [air, unspecified]: 4.71671e-6 kg
- Carbon monoxide, non-fossil [air, unspecified]: 7.03381e-7 kg
- Carbon monoxide, non-fossil [air, urban air close to ground]: 5.34846e-7 kg
- Carbonyl sulfide [air, unspecified]: 1.75885e-8 kg
- Chlorine [air, unspecified]: 2.3439e-9 kg
- Chlorine [air, urban air close to ground]: 8.94784e-9 kg
- Chloroethylene [air, unspecified]: 8.29184e-8 kg
- Chloroform [air, unspecified]: 1.94803e-9 kg
- Chromium III [air, non-urban air or from high stacks]: 3.09822e-6 kg
- Chromium III [air, unspecified]: 4.29076e-6 kg
- Chromium III [air, urban air close to ground]: 1.96846e-10 kg
- Chromium VI [air, non-urban air or from high stacks]: 7.74548e-8 kg
- Chromium VI [air, unspecified]: 1.03595e-13 kg
- Chromium VI [air, urban air close to ground]: 1.98837e-12 kg
- Cobalt II [air, non-urban air or from high stacks]: 2.01179e-8 kg
- Cobalt II [air, unspecified]: 1.18701e-8 kg
- Copper ion [air, non-urban air or from high stacks]: 4.9029e-7 kg
- Copper ion [air, unspecified]: 2.64393e-7 kg
- Copper ion [air, urban air close to ground]: 1.09362e-9 kg
- Cyanide [air, non-urban air or from high stacks]: 2.71092e-8 kg
- Dinitrogen monoxide [air, non-urban air or from high stacks]: 1.66691e-7 kg
- Dinitrogen monoxide [air, unspecified]: 5.53497e-8 kg
- Dinitrogen monoxide [air, urban air close to ground]: 1.14333e-7 kg
- Dioxins, measured as 2,3,7,8-tetrachlorodibenzo-p-dioxin [air, non-urban air or from high stacks]: 7.74548e-16 kg
- Dioxins, measured as 2,3,7,8-tetrachlorodibenzo-p-dioxin [air, unspecified]: 9.75349e-17 kg
- Dioxins, measured as 2,3,7,8-tetrachlorodibenzo-p-dioxin [air, urban air close to ground]: 1.4902e-15 kg
- Ethane, 1,1-difluoro-, HFC-152a [air, urban air close to ground]: 3.09347e-8 kg
- Ethane, 1,2-dichloro- [air, unspecified]: 6.16547e-8 kg
- Ethylene [air, unspecified]: 9.49388e-7 kg
- Fluorine [air, unspecified]: 3.04217e-8 kg
- Fluorine [air, urban air close to ground]: 2.5379e-9 kg
- Formaldehyde [air, unspecified]: 1.98748e-7 kg
- Formaldehyde [air, urban air close to ground]: 6.24946e-9 kg
- Hexane [air, urban air close to ground]: 8.91611e-6 kg
- Hydrocarbons, aliphatic, alkanes, unspecified [air, unspecified]: 2.35678e-9 kg
- Hydrocarbons, aliphatic, alkanes, unspecified [air, urban air close to ground]: 4.37464e-8 kg
- Hydrocarbons, aliphatic, unsaturated [air, unspecified]: 8.02858e-9 kg
- Hydrocarbons, aliphatic, unsaturated [air, urban air close to ground]: 1.4902e-7 kg
- Hydrocarbons, unspecified [air, non-urban air or from high stacks]: 1.61848e-11 kg
- Hydrochloric acid [air, unspecified]: 1.88894e-8 kg
- Hydrogen [air, unspecified]: 0.000261126 kg
- Hydrogen fluoride [air, unspecified]: 1.3987e-9 kg
- Hydrogen sulfide [air, non-urban air or from high stacks]: 1.58653e-6 kg
- Hydrogen sulfide [air, unspecified]: 2.29792e-8 kg
- Lead II [air, non-urban air or from high stacks]: 5.45863e-11 kg
- Lead II [air, unspecified]: 1.09159e-7 kg
- Lead II [air, urban air close to ground]: 1.23799e-9 kg
- Magnesium [air, non-urban air or from high stacks]: 1.47087e-6 kg
- Magnesium [air, unspecified]: 9.32352e-10 kg
- Magnesium [air, urban air close to ground]: 1.79433e-8 kg
- Manganese II [air, unspecified]: 4.80099e-10 kg
- Manganese II [air, urban air close to ground]: 8.49822e-9 kg
- Mercury II [air, unspecified]: 2.16761e-9 kg
- Mercury II [air, urban air close to ground]: 1.49124e-11 kg
- Methane, bromo-, Halon 1001 [air, unspecified]: 8.47035e-8 kg
- Methane, fossil [air, non-urban air or from high stacks]: 1.54952e-8 kg
- Methane, fossil [air, unspecified]: 5.9726e-7 kg
- Methane, non-fossil [air, non-urban air or from high stacks]: 1.49745e-6 kg
- Methane, non-fossil [air, unspecified]: 6.66592e-9 kg
- Methane, non-fossil [air, urban air close to ground]: 2.24974e-8 kg
- Methane, tetrachloro-, R-10 [air, unspecified]: 1.03478e-9 kg
- Methanol [air, non-urban air or from high stacks]: 6.16365e-9 kg
- Methanol [air, unspecified]: 3.57634e-8 kg
- Methyl acetate [air, unspecified]: 4.53834e-8 kg
- Methyl formate [air, unspecified]: 3.53141e-10 kg
- Molybdenum VI [air, unspecified]: 1.63682e-15 kg
- Monochloroethane [air, unspecified]: 1.62683e-9 kg
- NMVOC, non-methane volatile organic compounds [air, non-urban air or from high stacks]: 1.90034e-6 kg
- NMVOC, non-methane volatile organic compounds [air, unspecified]: 2.60944e-5 kg
- NMVOC, non-methane volatile organic compounds [air, urban air close to ground]: 3.39952e-8 kg
- Nickel II [air, non-urban air or from high stacks]: 6.03003e-7 kg
- Nickel II [air, unspecified]: 1.69629e-7 kg
- Nickel II [air, urban air close to ground]: 2.98261e-10 kg
- Nitric oxide [air, unspecified]: 9.08206e-7 kg
- Nitrogen [air, unspecified]: 0.000151209 kg
- Nitrogen oxides [air, non-urban air or from high stacks]: 5.46919e-6 kg
- Nitrogen oxides [air, unspecified]: 2.35647e-6 kg
- Nitrogen oxides [air, urban air close to ground]: 4.36103e-6 kg
- Oxygen [air, unspecified]: 1.69744e-7 kg
- PAH, polycyclic aromatic hydrocarbons [air, unspecified]: 2.87485e-11 kg
- PAH, polycyclic aromatic hydrocarbons [air, urban air close to ground]: 5.29016e-10 kg
- Palladium II [air, unspecified]: 1.32432e-12 kg
- Particulate Matter, < 2.5 um [air, non-urban air or from high stacks]: 2.14128e-5 kg
- Particulate Matter, < 2.5 um [air, unspecified]: 1.69904e-7 kg
- Particulate Matter, < 2.5 um [air, urban air close to ground]: 2.07481e-6 kg
- Particulate Matter, > 10 um [air, non-urban air or from high stacks]: 6.30403e-6 kg
- Particulate Matter, > 10 um [air, unspecified]: 5.60415e-6 kg
- Particulate Matter, > 10 um [air, urban air close to ground]: 0.000117554 kg
- Particulate Matter, > 2.5 um and < 10um [air, non-urban air or from high stacks]: 9.36618e-6 kg
- Particulate Matter, > 2.5 um and < 10um [air, unspecified]: 6.71896e-6 kg
- Particulate Matter, > 2.5 um and < 10um [air, urban air close to ground]: 5.29951e-9 kg
- Phenol [air, unspecified]: 8.75108e-8 kg
- Phenol, pentachloro- [air, unspecified]: 2.09779e-14 kg
- Phenol, pentachloro- [air, urban air close to ground]: 3.89392e-13 kg
- Phosphorus [air, unspecified]: 7.7696e-10 kg
- Phosphorus [air, urban air close to ground]: 1.49124e-8 kg
- Platinum [air, non-urban air or from high stacks]: 2.01179e-11 kg
- Potassium I [air, unspecified]: 6.06029e-8 kg
- Potassium I [air, urban air close to ground]: 1.16321e-6 kg
- Propanol [air, urban air close to ground]: 1.07708e-5 kg
- Propene [air, unspecified]: 4.689e-8 kg
- Radium-226 [air, non-urban air or from high stacks]: 1.01856e-8 kBq
- Selenium IV [air, unspecified]: 1.55324e-9 kg
- Silver I [air, non-urban air or from high stacks]: 2.10505e-10 kg
- Silver I [air, unspecified]: 1.75679e-12 kg
- Sodium [air, unspecified]: 3.36683e-9 kg
- Sodium [air, urban air close to ground]: 6.46235e-8 kg
- Sulfur dioxide [air, non-urban air or from high stacks]: 3.86018e-6 kg
- Sulfur dioxide [air, unspecified]: 4.75403e-5 kg
- Sulfur dioxide [air, urban air close to ground]: 1.24049e-7 kg
- Sulfur hexafluoride [air, unspecified]: 1.53558e-12 kg
- Sulfur oxides [air, unspecified]: 1.53248e-10 kg
- Sulfur trioxide [air, unspecified]: 2.89812e-6 kg
- Sulfuric acid [air, unspecified]: 4.39861e-8 kg
- Sulfuric acid [air, urban air close to ground]: 1.38562e-10 kg
- Thorium-232 [air, non-urban air or from high stacks]: 6.39932e-9 kBq
- Tin ion [air, unspecified]: 6.08101e-10 kg
- Titanium ion [air, non-urban air or from high stacks]: 3.52923e-10 kg
- Toluene [air, unspecified]: 3.38601e-8 kg
- Toluene [air, urban air close to ground]: 1.44215e-8 kg
- Trichloroethylene [air, unspecified]: 6.46595e-10 kg
- Uranium-238 [air, non-urban air or from high stacks]: 2.96857e-9 kBq
- VOC, volatile organic compounds [air, unspecified]: 1.41789e-7 kg
- Vanadium V [air, non-urban air or from high stacks]: 4.96239e-10 kg
- Vanadium V [air, unspecified]: 5.30463e-12 kg
- Water [air, non-urban air or from high stacks]: 1.07204e-5 m3
- Water [air, unspecified]: 0.00746202 m3
- Water [air, urban air close to ground]: 3.49545e-6 m3
- Xylene [air, unspecified]: 1.02158e-7 kg
- Zinc II [air, unspecified]: 2.29995e-8 kg
- Zinc II [air, urban air close to ground]: 1.49124e-8 kg
- Zirconium [air, non-urban air or from high stacks]: 3.55561e-10 kg
- m-Xylene [air, unspecified]: 3.10784e-10 kg
- m-Xylene [air, urban air close to ground]: 5.76874e-9 kg
- Azoxystrobin [soil, agricultural]: 3.63764e-9 kg
- Cadmium II [soil, agricultural]: 2.90317e-10 kg
- Chlorpyrifos methyl [soil, agricultural]: 5.77207e-10 kg
- Chromium III [soil, agricultural]: 3.19419e-9 kg
- Copper ion [soil, agricultural]: 1.93435e-8 kg
- Cyproconazole [soil, agricultural]: 6.7609e-9 kg
- Glyphosate [soil, agricultural]: 4.24648e-9 kg
- Hexaconazole [soil, agricultural]: 1.59066e-9 kg
- Lead II [soil, agricultural]: 9.44685e-10 kg
- Mercury II [soil, agricultural]: 6.05969e-12 kg
- Nickel II [soil, agricultural]: 4.11904e-10 kg
- Paraquat [soil, agricultural]: 1.4243e-8 kg
- Pyraclostrobin [soil, agricultural]: 2.90615e-9 kg
- Sulfur [soil, industrial]: 2.93315e-7 kg
- Terbufos [soil, agricultural]: 1.8231e-8 kg
- Thiamethoxam [soil, agricultural]: 4.84359e-9 kg
- Zinc II [soil, agricultural]: 4.20164e-9 kg
- AOX, Adsorbable Organic Halogen [water, surface water]: 4.95451e-8 kg
- AOX, Adsorbable Organic Halogen [water, unspecified]: 2.78965e-9 kg
- Acidity, unspecified [water, surface water]: 2.13348e-12 kg
- Aluminium III [water, surface water]: 8.43981e-9 kg
- Aluminium III [water, unspecified]: 9.66035e-10 kg
- Ammonium [water, ground-]: 0.000366803 kg
- Ammonium [water, ocean]: 3.06928e-11 kg
- Ammonium [water, surface water]: 0.00377592 kg
- Ammonium [water, unspecified]: 1.17587e-7 kg
- Antimony ion [water, surface water]: 8.44288e-9 kg
- Antimony ion [water, unspecified]: 6.72742e-11 kg
- Arsenic ion [water, ocean]: 1.49064e-10 kg
- Arsenic ion [water, surface water]: 1.40991e-8 kg
- Arsenic ion [water, unspecified]: 3.82751e-12 kg
- BOD5, Biological Oxygen Demand [water, ground-]: 1.70957e-5 kg
- BOD5, Biological Oxygen Demand [water, surface water]: 2.60285e-7 kg
- BOD5, Biological Oxygen Demand [water, unspecified]: 3.41815e-6 kg
- Benzene, hexachloro- [water, unspecified]: 8.39576e-14 kg
- Benzene, pentachloro- [water, unspecified]: 1.37767e-13 kg
- Boron [water, surface water]: 9.28145e-7 kg
- COD, Chemical Oxygen Demand [water, ground-]: 3.41914e-5 kg
- COD, Chemical Oxygen Demand [water, ocean]: 6.54653e-11 kg
- COD, Chemical Oxygen Demand [water, surface water]: 2.36546e-6 kg
- COD, Chemical Oxygen Demand [water, unspecified]: 1.56894e-5 kg
- Cadmium II [water, ground-]: 9.87227e-13 kg
- Cadmium II [water, ocean]: 1.83133e-11 kg
- Cadmium II [water, surface water]: 8.54203e-10 kg
- Cadmium II [water, unspecified]: 6.74019e-11 kg
- Calcium II [water, surface water]: 0.000140628 kg
- Carbonate [water, surface water]: 4.30371e-11 kg
- Chloride [water, surface water]: 0.000727407 kg
- Chloride [water, unspecified]: 8.16811e-5 kg
- Chlorides, unspecified [water, unspecified]: 1.20691e-6 kg
- Chlorine [water, surface water]: 4.77712e-11 kg
- Chloroethylene [water, unspecified]: 4.0753e-10 kg
- Chloroform [water, unspecified]: 1.08028e-11 kg
- Chromium III [water, ground-]: 4.67391e-10 kg
- Chromium III [water, surface water]: 8.8512e-9 kg
- Chromium III [water, unspecified]: 2.60904e-8 kg
- Chromium VI [water, surface water]: 2.35415e-15 kg
- Cobalt II [water, ocean]: 1.91648e-9 kg
- Cobalt II [water, surface water]: 1.50118e-8 kg
- Cobalt II [water, unspecified]: 4.91379e-9 kg
- Copper ion [water, ground-]: 8.19021e-11 kg
- Copper ion [water, ocean]: 4.07535e-10 kg
- Copper ion [water, surface water]: 1.48265e-8 kg
- Copper ion [water, unspecified]: 2.6125e-8 kg
- Cyanide [water, ocean]: 1.7004e-14 kg
- Cyanide [water, surface water]: 1.41244e-11 kg
- DOC, Dissolved Organic Carbon [water, ground-]: 1.26635e-5 kg
- DOC, Dissolved Organic Carbon [water, surface water]: 6.11536e-6 kg
- DOC, Dissolved Organic Carbon [water, unspecified]: 5.64551e-7 kg
- Dioxins, measured as 2,3,7,8-tetrachlorodibenzo-p-dioxin [water, unspecified]: 3.00193e-17 kg
- Dissolved solids [water, surface water]: 2.27246e-8 kg
- Ethane, 1,2-dichloro- [water, unspecified]: 9.04977e-11 kg
- Fluoride [water, ocean]: 4.74343e-9 kg
- Fluoride [water, surface water]: 4.2192e-7 kg
- Fluoride [water, unspecified]: 4.28141e-10 kg
- Hydrochloric acid [water, unspecified]: 1.17748e-7 kg
- Hydrogen sulfide [water, surface water]: 7.10672e-10 kg
- Iron ion [water, ocean]: 9.22101e-8 kg
- Iron ion [water, surface water]: 8.45085e-9 kg
- Iron ion [water, unspecified]: 1.51471e-6 kg
- Lead II [water, ground-]: 6.55582e-12 kg
- Lead II [water, ocean]: 3.91386e-13 kg
- Lead II [water, surface water]: 1.65619e-9 kg
- Lead II [water, unspecified]: 2.59491e-8 kg
- Lead-210 [water, surface water]: 0.00013219 kBq
- Magnesium [water, surface water]: 2.81264e-5 kg
- Manganese II [water, surface water]: 1.41434e-8 kg
- Mercury II [water, ground-]: 1.09143e-12 kg
- Mercury II [water, ocean]: 1.90307e-12 kg
- Mercury II [water, surface water]: 8.44805e-10 kg
- Mercury II [water, unspecified]: 2.86842e-11 kg
- Methane, tetrachloro-, R-10 [water, unspecified]: 6.61912e-12 kg
- Molybdenum VI [water, surface water]: 8.43768e-9 kg
- Nickel II [water, ground-]: 3.16219e-13 kg
- Nickel II [water, ocean]: 2.67043e-9 kg
- Nickel II [water, surface water]: 1.55428e-8 kg
- Nickel II [water, unspecified]: 2.61205e-8 kg
- Nitrate [water, ground-]: 8.29228e-6 kg
- Nitrate [water, ocean]: 3.82589e-12 kg
- Nitrate [water, surface water]: 1.4063e-5 kg
- Nitrate [water, unspecified]: 1.15936e-9 kg
- Nitrogen [water, ocean]: 1.0328e-6 kg
- Nitrogen [water, surface water]: 9.16195e-9 kg
- Nitrogen [water, unspecified]: 8.85322e-7 kg
- Nitrogen dioxide [water, surface water]: 2.16535e-13 kg
- Nitrogen, organic bound [water, unspecified]: 1.17737e-7 kg
- Oils, non-fossil [water, surface water]: 1.9412e-9 kg
- PAH, polycyclic aromatic hydrocarbons [water, surface water]: 5.03456e-11 kg
- Phenol [water, surface water]: 1.29921e-14 kg
- Phosphate [water, ground-]: 4.21396e-9 kg
- Phosphate [water, surface water]: 2.85102e-8 kg
- Phosphorus [water, surface water]: 1.12986e-8 kg
- Phosphorus [water, unspecified]: 2.05588e-7 kg
- Polonium-210 [water, surface water]: 0.00013219 kBq
- Potassium I [water, surface water]: 1.40628e-7 kg
- Potassium-40 [water, surface water]: 0.000165941 kBq
- Radium-226 [water, surface water]: 8.15642e-5 kBq
- Selenium IV [water, surface water]: 1.40652e-9 kg
- Sodium [water, unspecified]: 2.6683e-11 kg
- Sodium I [water, surface water]: 8.49367e-6 kg
- Sodium I [water, unspecified]: 4.93642e-5 kg
- Sulfate [water, surface water]: 2.81326e-5 kg
- Sulfate [water, unspecified]: 0.00895613 kg
- Sulfite [water, surface water]: 2.81256e-7 kg
- Sulfur [water, surface water]: 1.80756e-11 kg
- Sulfuric acid [water, surface water]: 1.31788e-7 kg
- Suspended solids, unspecified [water, surface water]: 7.99599e-7 kg
- Suspended solids, unspecified [water, unspecified]: 3.38069e-6 kg
- TOC, Total Organic Carbon [water, ground-]: 1.26635e-5 kg
- TOC, Total Organic Carbon [water, surface water]: 6.11536e-6 kg
- TOC, Total Organic Carbon [water, unspecified]: 5.64551e-7 kg
- Thallium I [water, ocean]: 1.76128e-13 kg
- Thorium-232 [water, surface water]: 3.09382e-5 kBq
- Tin ion [water, surface water]: 8.43768e-9 kg
- Titanium ion [water, unspecified]: 1.29735e-7 kg
- Uranium-238 [water, surface water]: 6.46889e-5 kBq
- Vanadium V [water, surface water]: 8.43768e-9 kg
- Water [water, ground-]: 1.26249e-6 m3
- Water [water, surface water]: 1.58724e-5 m3
- Water [water, unspecified]: 9.32455e-5 m3
- Zinc II [water, ground-]: 4.75654e-10 kg
- Zinc II [water, ocean]: 1.46891e-10 kg
- Zinc II [water, surface water]: 1.52656e-8 kg
- Zinc II [water, unspecified]: 2.68854e-8 kg
