# treatment of waste rubber, unspecified, municipal incineration

Dataset: EcoSpold 2, unit process
Geography: CH
Time period: 1994-01-01 to 2022-12-31
Technology level: outdated
Classification: EcoSpold01Categories: waste management/municipal incineration
Classification: ISIC rev.4 ecoinvent: 3821:Treatment and disposal of non-hazardous waste
Tags: Treatment; ConvertedDataset
Scenario: Business-as-Usual
System model: Allocation at the point of substitution
Generated by: Gabor Doka (obsolete)
Published in: Doka G. 2007
Database: ecoinvent
isCopyrightProtected: true

## General comment
Inventoried waste contains 100% rubber; .
waste composition (wet, in ppm): upper heating value 29.3 MJ/kg; lower heating value 27.19 MJ/kg; H2O n.a.; O n.a.; H 106690; C 853530; S 3700; N n.a.; P n.a.; B n.a.; Cl 20000; Br n.a.; F n.a.; I n.a.; Ag n.a.; As n.a.; Ba n.a.; Cd 8; Co n.a.; Cr n.a.; Cu n.a.; Hg 0.001; Mn n.a.; Mo n.a.; Ni n.a.; Pb 70; Sb n.a.; Se n.a.; Sn n.a.; V n.a.; Zn 16000; Be n.a.; Sc n.a.; Sr n.a.; Ti n.a.; Tl n.a.; W n.a.; Si n.a.; Fe n.a.; Ca n.a.; Al n.a.; K n.a.; Mg n.a.; Na n.a.;
Share of carbon in waste that is biogenic 0%.
Share of iron in waste that is metallic/recyclable 0%.
Net energy produced in MSWI: 3.02MJ/kg waste electric energy and 6.11MJ/kg waste thermal energy
Allocation of energy production: no substitution or expansion. Total burden allocated to waste disposal function of MSWI.
One kg of this waste produces 0.01306 kg of slag and 0.02671 kg of residues, which are landfilled. Additional solidification with 0.01068 kg of cement.
[This dataset was already contained in the ecoinvent database version 2. It was not individually updated during the transfer to ecoinvent version 3. Life Cycle Impact Assessment results may still have changed, as they are affected by changes in the supply chain, i.e. in other datasets. This dataset was generated following the ecoinvent quality guidelines for version 2. It may have been subject to central changes described in the ecoinvent version 3 change report (http://www.ecoinvent.org/database/ecoinvent-version-3/reports-of-changes/), and the results of the central updates were reviewed extensively. The changes added e.g. consistent water flows and other information throughout the database. The documentation of this dataset can be found in the ecoinvent reports of version 2, which are still available via the ecoinvent website. The change report linked above covers all central changes that were made during the conversion process.]

## Included activities end
waste-specific air and water emisions from incineration, auxiliary material consumption for flue gas cleaning. Short-term emissions to river water and long-term emisisons to ground water from slag compartment (from bottom slag) and residual material landfill (from solidified fly ashes and scrubber slugde). Process energy demands for MSWI.

## Geography
Specific to the technology mix encountered in Switzerland in 2000. Well applicable to modern incineration practices in Europe, North America or Japan.

## Technology
replaced by newer incineration technology with fly ash extraction. Average Swiss MSWI plants in 2000 with electrostatic precipitator for fly ash (ESP), wet flue gas scrubber and 29.4% SNCR , 32.2% SCR-high dust , 24.6% SCR-low dust -DeNOx facilities and 13.8% without Denox (by burnt waste, according to Swiss average). Share of waste incinerated in plants with magnetic scrap separation from slag : 50%. Gross electric efficiency technology mix 12.997% and Gross thermal efficiency technology mix 25.57%

## Time period
Waste composition as given in literature reference, theoretical data or other source. Transfer coefficients for modern Swiss MSWI. Emission speciation based on early 90ies data.

## Reference product
- waste rubber, unspecified: -1 kg; name RP_amount_1; By-product classification Waste; CPC 39: Wastes or scraps
  EcoSpold01Location=CH
  production volume 0 kg
    outdated. Replaced by newer incineration technology with fly ash extraction.
  property heating value, net 27.19 MJ
    Value taken from the general comment of the treatment dataset.
  property price 0 EUR2005
    Waste products are assigned a price of zero as they are assumed to require further treatment.
  properties: carbon allocation 0.853 kg, carbon content 0.853, carbon content, fossil 0.853, carbon content, non-fossil 0, dry mass 1 kg, water content 0, water in wet mass 0 kg, wet mass 1 kg

## Inputs from technosphere
- cement, unspecified: 0.0107 kg; lognormal variance with pedigree 0.14, pedigree (1,1,5,1,1)
  Cement for solidification of landfilled residual material. Uncertainty calculated from unertainty of the waste composition of this waste, of transfer coefficients in the incinerator and of the solidification recipe.
  EcoSpold01Location=CH
  properties: dry mass 1 kg, wet mass 1 kg
- chemical, inorganic: 6.91e-5 kg; lognormal variance with pedigree 0.26, pedigree (1,1,5,1,1)
  EcoSpold01Location=GLO
  Proxy for Polyelectrolyte. uncertainty calculated from uncertainty in average auxiliary material input, and the unertainty of the waste composition of this waste
  properties: carbon content, fossil 0.003, dry mass 1 kg, wet mass 1 kg
  note on carbon content, fossil: This dataset is an unweighted average of 20 inorganic substances (listed in Tab 88.1, ecoinvent v2.2 report 8, part II), being part of the top100 chemicals included in this database. The C-content has also been calculated as an unweighted average of the C content of the substances composing this dataset.
- chemical, organic: 3.18e-5 kg; lognormal variance with pedigree 1.35, pedigree (1,1,5,1,1)
  EcoSpold01Location=GLO
  Proxy for TMT15. uncertainty calculated from uncertainty in average auxiliary material input, and the unertainty of the waste composition of this waste
  properties: carbon content, fossil 0.628, dry mass 1 kg, heating value, net 19.03 MJ, wet mass 1 kg
  note on carbon content, fossil: This dataset is an unweighted average of 20 organic substances (listed in Tab 88.1, ecoinvent v2.2 report 8, part II), being part of the top100 chemicals included in this database. The C-content has also been calculated as an unweighted average of the C content of the substances composing this dataset.
- hydrochloric acid, without water, in 30% solution state: 4.14e-5 kg; lognormal variance with pedigree 0.26, pedigree (1,1,5,1,1)
  uncertainty calculated from uncertainty in average auxiliary material input, and the unertainty of the waste composition of this waste
  EcoSpold01Location=RER
  properties: dry mass 1 kg, heating value, net 3.32 MJ, wet mass 1 kg
- iron (III) chloride, without water, in 40% solution state: 0.00167 kg; lognormal variance with pedigree 0.36, pedigree (1,1,5,1,1)
  EcoSpold01Location=CH
  uncertainty calculated from uncertainty in average auxiliary material input, and the unertainty of the waste composition of this waste
  properties: dry mass 1 kg, wet mass 1 kg
- municipal waste incineration facility: 2.5e-10 unit; lognormal variance with pedigree 0.04, pedigree (1,1,5,1,1)
  EcoSpold01Location=CH
  demands per kilogram waste. uncertainty is heeded in the module
- process-specific burdens, municipal waste incineration: 1 kg; lognormal variance with pedigree 0.04, pedigree (1,1,5,1,1)
  demands per kilogram waste. uncertainty is heeded in the module;activityLink introduced to establish a direct link to the corresponding regional supply of this product
  EcoSpold01Location=CH
- process-specific burdens, residual material landfill: 0.0267 kg; lognormal variance with pedigree 0.13, pedigree (1,1,5,1,1)
  EcoSpold01Location=CH
  uncertainty is calculated from uncertainties in waste composition and transfer coefficients in incinerator;activityLink introduced to establish a direct link to the corresponding regional supply of this product
- process-specific burdens, slag landfill: 0.0131 kg; lognormal variance with pedigree 0.07, pedigree (1,1,5,1,1)
  (same comment as for process-specific burdens, residual material landfill)
- quicklime, milled, packed: 0.00345 kg; lognormal variance with pedigree 0.33, pedigree (1,1,5,1,1)
  (same comment as for iron (III) chloride, without water, in 40% solution state)
  properties: dry mass 0.99 kg, water content 0.010101, wet mass 1 kg
- residual material landfill: 5.56e-11 unit; lognormal variance with pedigree 0.13, pedigree (1,1,5,1,1)
  uncertainty is calculated from uncertainties in waste composition and transfer coefficients in incinerator
  EcoSpold01Location=CH
- slag landfill: 2.32e-11 unit; lognormal variance with pedigree 0.07, pedigree (1,1,5,1,1)
  EcoSpold01Location=CH
  uncertainty is calculated from uncertainties in waste composition and transfer coefficients in incinerator
- sodium hydroxide, without water, in 50% solution state: 0.0208 kg; lognormal variance with pedigree 0.3, pedigree (1,1,5,1,1)
  (same comment as for hydrochloric acid, without water, in 30% solution state)
  properties: dry mass 1 kg, heating value, net 3.03 MJ, wet mass 1 kg
- waste cement, hydrated: -0.0267 kg; name BP_amount_1; lognormal variance with pedigree 0.1, pedigree (1,1,1,1,1)
  Hydrated cement for solidification of landfilled residual material. Uncertainty calculated from unertainty of the waste composition of this waste and transfer coefficients in the incinerator and of the solidification recipe.
  EcoSpold01Location=CH
  production volume
    Calculated from the production volume of waste rubber, unspecified, 0% water in proportion to the respective output amounts.
  properties: dry mass 1 kg, wet mass 1 kg

## Emissions to nature
- Cadmium II [air, urban air close to ground]: 4.41e-10 kg; lognormal variance with pedigree 1.38, pedigree (1,1,5,1,1)
  uncertainty is calculated from uncertainties in waste composition and transfer coefficients in incinerator
- Carbon dioxide, fossil [air, urban air close to ground]: 3.09 kg; lognormal variance with pedigree 0.04, pedigree (1,1,5,1,1)
  (same comment as for Cadmium II)
- Carbon monoxide, fossil [air, urban air close to ground]: 0.000223 kg; lognormal variance with pedigree 0.690625, pedigree (1,3,5,2,1)
  Literature data from switzerland and germany adapted to plant age distribution in switzerland
  Uncertainty: & basic uncertainty of 5; literature data from switzerland and germany adapted to plant age distribution in switzerland
- Hydrochloric acid [air, urban air close to ground]: 2.22e-7 kg; lognormal variance with pedigree 0.38, pedigree (1,1,5,1,1)
  (same comment as for Cadmium II)
- Lead II [air, urban air close to ground]: 2.6e-9 kg; lognormal variance with pedigree 1.09, pedigree (1,1,5,1,1)
  (same comment as for Cadmium II)
- Mercury II [air, urban air close to ground]: 3.45e-17 kg; lognormal variance with pedigree 2.06, pedigree (1,1,5,1,1)
  (same comment as for Cadmium II)
- Methane, fossil [air, urban air close to ground]: 6.38e-6 kg; lognormal variance with pedigree 0.091225, pedigree (2,3,5,2,1)
  Confidential data from 5 plants in Switzerland and Germany
  Uncertainty: & basic uncertainty of 1.5; confidential data from 5 plants in Switzerland and Germany
- Sulfur dioxide [air, urban air close to ground]: 1.58e-5 kg; lognormal variance with pedigree 0.55, pedigree (1,1,5,1,1)
  (same comment as for Cadmium II)
- Zinc II [air, urban air close to ground]: 2.61e-7 kg; lognormal variance with pedigree 0.4, pedigree (1,1,5,1,1)
  (same comment as for Cadmium II)
- BOD5, Biological Oxygen Demand [water, ground-, long-term]: 0.00689 kg; lognormal variance with pedigree 0.05, pedigree (1,1,5,1,1)
  Long-term emissions from landfilling of incineration residues. uncertainty is calculated from uncertainties in waste composition and transfer coefficients in incinerator and landfills.
- BOD5, Biological Oxygen Demand [water, surface water]: 3.19e-5 kg; lognormal variance with pedigree 0.16, pedigree (1,1,5,1,1)
  uncertainty is calculated from uncertainties in waste composition and transfer coefficients in incinerator and landfills
- COD, Chemical Oxygen Demand [water, ground-, long-term]: 0.0211 kg; lognormal variance with pedigree 0.05, pedigree (1,1,5,1,1)
  (same comment as for BOD5, Biological Oxygen Demand)
- COD, Chemical Oxygen Demand [water, surface water]: 5.7e-5 kg; lognormal variance with pedigree 0.28, pedigree (1,1,5,1,1)
  (same comment as for BOD5, Biological Oxygen Demand)
- Cadmium II [water, ground-, long-term]: 8.03e-8 kg; lognormal variance with pedigree 7.1, pedigree (1,1,5,1,1)
  (same comment as for BOD5, Biological Oxygen Demand)
- Cadmium II [water, surface water]: 3.63e-9 kg; lognormal variance with pedigree 1.3, pedigree (1,1,5,1,1)
  (same comment as for BOD5, Biological Oxygen Demand)
- Chloride [water, ground-, long-term]: 0.000472 kg; lognormal variance with pedigree 0.16, pedigree (1,1,5,1,1)
  (same comment as for BOD5, Biological Oxygen Demand)
- Chloride [water, surface water]: 0.0195 kg; lognormal variance with pedigree 0.29, pedigree (1,1,5,1,1)
  (same comment as for BOD5, Biological Oxygen Demand)
- DOC, Dissolved Organic Carbon [water, ground-, long-term]: 0.00833 kg; lognormal variance with pedigree 0.05, pedigree (1,1,5,1,1)
  (same comment as for BOD5, Biological Oxygen Demand)
- DOC, Dissolved Organic Carbon [water, surface water]: 2.34e-5 kg; lognormal variance with pedigree 0.27, pedigree (1,1,5,1,1)
  (same comment as for BOD5, Biological Oxygen Demand)
- Lead II [water, ground-, long-term]: 4.99e-6 kg; lognormal variance with pedigree 7.11, pedigree (1,1,5,1,1)
  (same comment as for BOD5, Biological Oxygen Demand)
- Lead II [water, surface water]: 1.95e-9 kg; lognormal variance with pedigree 1.09, pedigree (1,1,5,1,1)
  (same comment as for BOD5, Biological Oxygen Demand)
- Mercury II [water, ground-, long-term]: 5.2e-11 kg; lognormal variance with pedigree 3.69, pedigree (1,1,5,1,1)
  (same comment as for BOD5, Biological Oxygen Demand)
- Mercury II [water, surface water]: 1.07e-11 kg; lognormal variance with pedigree 1.93, pedigree (1,1,5,1,1)
  (same comment as for BOD5, Biological Oxygen Demand)
- Sulfate [water, ground-, long-term]: 0.00928 kg; lognormal variance with pedigree 0.31, pedigree (1,1,5,1,1)
  (same comment as for BOD5, Biological Oxygen Demand)
- Sulfate [water, surface water]: 0.0018 kg; lognormal variance with pedigree 0.26, pedigree (1,1,5,1,1)
  (same comment as for BOD5, Biological Oxygen Demand)
- TOC, Total Organic Carbon [water, ground-, long-term]: 0.00833 kg; lognormal variance with pedigree 0.05, pedigree (1,1,5,1,1)
  (same comment as for BOD5, Biological Oxygen Demand)
- TOC, Total Organic Carbon [water, surface water]: 2.34e-5 kg; lognormal variance with pedigree 0.27, pedigree (1,1,5,1,1)
  (same comment as for BOD5, Biological Oxygen Demand)
- Zinc II [water, ground-, long-term]: 0.000248 kg; lognormal variance with pedigree 5.06, pedigree (1,1,5,1,1)
  (same comment as for BOD5, Biological Oxygen Demand)
- Zinc II [water, surface water]: 2.94e-6 kg; lognormal variance with pedigree 0.35, pedigree (1,1,5,1,1)
  (same comment as for BOD5, Biological Oxygen Demand)

## Sampling procedure
waste-specific calculation based on literature data

## Extrapolations
Typical elemental transfer coefficients from current studies for modern MSWI, completed with data from coal power plants and estimates, adapted for inert/burnable waste.

## Review by Niels Jungbluth 2003-07-15
Passed. Calculation for standard deviation 95 of, i.e., infrastructure,
land occupation, transport services or other services can differ from
standard Pedigree approach used in this project and figures obtained by
this procedure.
