# power sawing, with catalytic converter

Dataset: EcoSpold 2, unit process
Geography: RoW
Time period: 1993-01-01 to 2022-12-31
Technology level: outdated
Classification: ISIC rev.4 ecoinvent: 1610:Sawmilling and planing of wood
Classification: EcoSpold01Categories: construction processes/machinery
Synonyms: motor; chain; Kettensäge
Tags: ConvertedDataset
Scenario: Business-as-Usual
System model: Allocation at the point of substitution
Generated by: Daniel Kellenberger (obsolete)
Published in: Kellenberger D. 2007
Database: ecoinvent
isCopyrightProtected: true

## General comment
All measured emissions are taken from an old (1993) EMPA report. The type of power saw probably does not correspond to the type described in the infrastructure, but this discrepancy can be accepted. This module should not be used if its relative high importance would be high in a certain environmental inventory.
[This dataset was already contained in the ecoinvent database version 2. It was not individually updated during the transfer to ecoinvent version 3. Life Cycle Impact Assessment results may still have changed, as they are affected by changes in the supply chain, i.e. in other datasets. This dataset was generated following the ecoinvent quality guidelines for version 2. It may have been subject to central changes described in the ecoinvent version 3 change report (http://www.ecoinvent.org/database/ecoinvent-version-3/reports-of-changes/), and the results of the central updates were reviewed extensively. The changes added e.g. consistent water flows and other information throughout the database. The documentation of this dataset can be found in the ecoinvent reports of version 2, which are still available via the ecoinvent website. The change report linked above covers all central changes that were made during the conversion process.]

## Included activities end
Includes the Inputs: power saw (infrastructure), fuel use, lubricating oil requirements, and some measured air emissions (including emissions from combustion of the fuel). The saw is equipped with a catalytic converter.

## Geography
The type of machine whose air emissions were measured is unknown. Certain elementary flows or intermediate product flows are extrapolated from other geographical areas than indicated.

## Technology
The module represents an example for an average technology used in Europe in the late 1990s

## Reference product
- power sawing, with catalytic converter: 1 hour; By-product classification allocatable product; CPC 88311: Wood manufacturing services
  EcoSpold01Location=RER
  production volume 2.67763 hour
    This is a placeholder value that does not reflect real-world production volumes. This dataset does not currently require a real-world production volume to work in the database framework, and no actual data were collected yet. This has no negative effect on the results of the ecoinvent database.
  property price 1.5631 EUR2005
    Calculated based on inputs: The price of the product has been calculated as a sum of the values of the material and energy inputs for this product. This value is therefore a rough estimation. It may underestimate the real price since there are additional expenses when producing any product. These expences can include for example labour costs, treatment of waste materials and profit for the producer. Please consider carefully whether this level of data quality is acceptable for your application.
  properties: carbon allocation 0 kg, carbon content 0

## Inputs from technosphere
- petrol, two-stroke blend: 1.25 kg; lognormal variance with pedigree 0.07, pedigree (1,5,5,5,1)
  EcoSpold01Location=RER
  properties: carbon content, fossil 0.865, dry mass 1 kg, heating value, net 43.2 MJ, wet mass 1 kg
  note on heating value, net: Assumed equal to "petroleum". LHV for petroleum: Based on literature, page 7, Report6, part 4
- power saw, with catalytic converter: 0.0004 unit; lognormal variance with pedigree 0.37, pedigree (1,5,5,5,1)
  EcoSpold01Location=RER
- soybean oil, crude: 0.54 kg; lognormal variance with pedigree 0.148, pedigree (5,5,5,5,3)
  EcoSpold01Location=RER
  properties: carbon content, non-fossil 0.768, dry mass 1 kg, heating value, net 38.4 MJ, wet mass 1 kg
  note on heating value, net: Values is approximated from HHV from "vegetable oil, crude". Source: Radovanovic,M.; Zivanovic,T.; Stojiljkovic,D.; Jovanovic,V.; Jerinic,N.; Knezevic,S. et.al. Utilization of sunflower husk as a fuel for industrial boilers - 20 years experience. Proc. 5th Eur. Conf. on Industrial Furnaces&Boilers 2000,vol.2,p.221-233. Available at: https://phyllis.nl/Biomass/View/2152
- steel, chromium steel 18/8, hot rolled: 0.0122 kg; lognormal variance with pedigree 0.37, pedigree (1,5,5,5,1)
  EcoSpold01Location=RER
  properties: carbon content, fossil 0.0008, dry mass 1 kg, wet mass 1 kg
  note on carbon content, fossil: Stainless steel model is the grade 304 steel (18/8 stainless, 18% chromium 8% nickel; max. 0.08% C)

## Emissions to nature
- Carbon dioxide, fossil [air, non-urban air or from high stacks]: 3.47 kg; lognormal variance with pedigree 0.07, pedigree (1,5,5,5,1)
- Carbon monoxide, fossil [air, non-urban air or from high stacks]: 0.16 kg; lognormal variance with pedigree 0.71, pedigree (1,5,5,5,1)
- Lead II [air, non-urban air or from high stacks]: 8.74e-5 kg; lognormal variance with pedigree 0.71, pedigree (1,5,5,5,1)
- Methane, fossil [air, non-urban air or from high stacks]: 0.0016 kg; lognormal variance with pedigree 0.11, pedigree (1,5,5,5,1)
- NMVOC, non-methane volatile organic compounds [air, non-urban air or from high stacks]: 0.0784 kg; lognormal variance with pedigree 0.19, pedigree (1,5,5,5,1)
- Nitrogen oxides [air, non-urban air or from high stacks]: 0.018 kg; lognormal variance with pedigree 0.11, pedigree (1,5,5,5,1)
- Sulfur dioxide [air, non-urban air or from high stacks]: 0.000806 kg; lognormal variance with pedigree 0.19, pedigree (1,5,5,5,1)
- Oils, non-fossil [soil, forestry]: 0.054 kg; lognormal variance with pedigree 0.11, pedigree (1,5,5,5,1)

## Sampling procedure
most data from one technical report

## Extrapolations
See geography This dataset has been copied from an original dataset covering the geography RER. The uncertainty has been adjusted accordingly.

## Review by Roberto Dones 2003-08-26
passed

## Review by Emilia Moreno Ruiz 2014-05-21
technology level changed to outdated
