# recultivation, limestone mine

Dataset: EcoSpold 2, unit process
Geography: RoW
Time period: 2000-01-01 to 2022-12-31
Technology level: current
Classification: ISIC rev.4 ecoinvent: 3900:Remediation activities and other waste management services
Classification: EcoSpold01Categories: construction materials/additives
Synonyms: Renaturierung
Tags: ConvertedDataset
Scenario: Business-as-Usual
System model: Allocation at the point of substitution
Generated by: Daniel Kellenberger (obsolete)
Published in: Kellenberger D. 2007
Database: ecoinvent
isCopyrightProtected: true

## General comment
The ratio of topsoil (assumed density: 1'400 kg/m3, thickness: 0.3 m, weight: 420 kg/m2, ) to extracted limestone (density: 2'300 kg/m3, thickness: 70m, weight: 160'000 kg/m2) is about 0.26%. The diesel fuel used for covering the closed mine is thus calculated using this ratio compared to its requirement during operation of the mine.
[This dataset was already contained in the ecoinvent database version 2. It was not individually updated during the transfer to ecoinvent version 3. Life Cycle Impact Assessment results may still have changed, as they are affected by changes in the supply chain, i.e. in other datasets. This dataset was generated following the ecoinvent quality guidelines for version 2. It may have been subject to central changes described in the ecoinvent version 3 change report (http://www.ecoinvent.org/database/ecoinvent-version-3/reports-of-changes/), and the results of the central updates were reviewed extensively. The changes added e.g. consistent water flows and other information throughout the database. The documentation of this dataset can be found in the ecoinvent reports of version 2, which are still available via the ecoinvent website. The change report linked above covers all central changes that were made during the conversion process.]

## Included activities end
includes only transformation from mineral extraction site to forest and the diesel consumption.

## Geography
data are only from one company in Switzerland (KFN)

## Technology
Recultivation topsoil thickness 30 cm for a medium-size Swiss limestone mine .

## Reference product
- recultivation, limestone mine: 1 m2; By-product classification allocatable product; CPC 9441: Site remediation and clean-up services
  EcoSpold01Location=CH
  production volume 3.96633 m2
    This is a placeholder value that does not reflect real-world production volumes. This dataset does not currently require a real-world production volume to work in the database framework, and no actual data were collected yet. This has no negative effect on the results of the ecoinvent database.
  property price 0.139872 EUR2005
    Calculated based on inputs: The price of the product has been calculated as a sum of the values of the material and energy inputs for this product. This value is therefore a rough estimation. It may underestimate the real price since there are additional expenses when producing any product. These expences can include for example labour costs, treatment of waste materials and profit for the producer. Please consider carefully whether this level of data quality is acceptable for your application.
  properties: carbon allocation 0 kg, carbon content 0

## Inputs from technosphere
- diesel, burned in building machine: 7.44 MJ; lognormal variance with pedigree 0.3706, pedigree (4,3,5,5,1)
  EcoSpold01Location=GLO
  properties: heating value, net 1 MJ

## Inputs from nature
- Transformation, from mineral extraction site [natural resource, land]: 1 m2; lognormal variance with pedigree 0.1641, pedigree (3,2,5,5,1)
- Transformation, to forest, unspecified [natural resource, land]: 1 m2; lognormal variance with pedigree 0.1641, pedigree (3,2,5,5,1)

## Sampling procedure
survey

## Extrapolations
data which are only available for GLO have been used as proxy for CH This dataset has been copied from an original dataset covering the geography CH. The uncertainty has been adjusted accordingly.

## Review by Roberto Dones 2003-07-04
Passed
