# treatment of aluminium scrap, post-consumer, by collecting, sorting, cleaning, pressing

Dataset: EcoSpold 2, unit process
Geography: RoW
Time period: 2005-01-01 to 2022-12-31
Technology level: current
Classification: EcoSpold01Categories: metals/extraction
Classification: ISIC rev.4 ecoinvent: 3830:Materials recovery
Synonyms: post consumer aluminium
Scenario: Business-as-Usual
System model: Allocation at the point of substitution
Share of production covered: 0 %
Generated by: Pascal Lesage
Published in: European Aluminium Association 2008
Database: ecoinvent
isCopyrightProtected: false

## General comment
This dataset is based on two sources: the European Aluminium Association 2005 LCI data (EAA, 2008); and (2) the ecoinvent v2.2 dataset for the same activity (Althaus, 2009), itself largely based on EAA data from 2000. Priority was given to data contained in EAA (2008); Althaus (2009) was used only in cases where it was found to be more complete that EAA (2008). Note that both sources are European in scope - this GLO dataset is therefore an extrapolation.
Note that EAA only obtained 2005 input and output data for wrought aluminium shredding and de-laquering. Other activities (cast alloy shredding, sink and float, cutting and baling, drying and deoiling and dismantling) were characterized using 1998 data, thought to be largely representative of activities in 2005. The different activities were scaled using scrap make-up data representative of 2005.
Note that the prepared scrap output has been renamed from "aluminium scrap, post-consumer, prepared for remelting" to "aluminium scrap, post-consumer, prepared for recycling" since the prepared scrap is treated downstream in both refining and remelting activities.

## Included activities start
Scrap preparation begins with the receiving of post-consumer aluminium scrap. This scrap can come from from very diverse sources, e.g. motor block engines, used beverage cans, facade panel, etc. The actual activities associated with scrap preparation will depend on the scap nature and can include shredding, sink and float, cutting and baling, drying and de-oiling, de-laquering, dismantling. Some scap requires no preparation whatsoever. This dataset represents the inputs and outputs for the preparation of averaged scrap and hence may not be representative of inputs and outputs associated with any particular type of scrap. For more information on the shares of scrap types and types of treatment activities included in this dataset, please refer to EAA 2008.

## Included activities end
The activity ends with the supply of post-consumer aluminium scrap ready to be recycled.

## Geography
Dataset mostly based on European data.

## Technology
Average technology for the aluminium recycled in Europe

## Time period
The actual input and output data for some of the scrap preparation activities date from 1998.

## Reference product
- iron scrap, unsorted: 1 kg; name ironScrapAmount; source European Aluminium Association 2008; By-product classification Recyclable; CPC 39310: Slag, dross, scalings and other waste from the manufacture of iron or steel; lognormal variance with pedigree 0.0112, pedigree (2,5,1,5,1)
  Reported as "Iron scrap"
  production volume 3.39977e8 kg
    Calculated from the production volume of aluminium scrap, post-consumer in proportion to the respective output amounts.
  property price 0.149 EUR2005
    Temporary price data. Calculated as 90% of purchasers price based on: estimated at 85% of sorted scrap
  properties: carbon allocation 0 kg, carbon content 0, carbon content, fossil 0, carbon content, non-fossil 0, dry mass 1 kg, water content 0, water in wet mass 0 kg, wet mass 1 kg

## Inputs from technosphere
- acrylic dispersion, with water, in 58% solution state: 1.4231e-6 kg
- acrylic varnish, with water, in 53% solution state: 4.67589e-7 kg
- acrylonitrile-butadiene-styrene copolymer: 1.80122e-6 kg
- alkyd paint, white, without solvent, in 60% solution state: 1.66471e-8, 7.90259e-8 kg (2 suppliers, which the file names only by identifier); sum of these 9.5673e-8 kg
- aluminium alloy, AlMg3: 4.31425e-7 kg
- aluminium scrap, new: -0.000708337, -0.000708337 kg (2 suppliers, which the file names only by identifier); sum of these -0.00141667 kg
- aluminium scrap, post-consumer: -0.000474092 kg
- aluminium, cast alloy: 0.00709294 kg
- aluminium, primary, ingot: 2.43357e-7, 2.56578e-8 kg (2 suppliers, which the file names only by identifier); sum of these 2.69015e-7 kg
- aluminium, wrought alloy: 0.000364803 kg
- blower and heat exchange unit, central, 600-1200 m3/h: 1.5296e-10 unit
- bronze: 4.54277e-9 kg
- building, hall, steel construction: 7.92061e-13 m2
- building, multi-storey: 3.08295e-11 m3
- cast iron: 0.000558867 kg
- cement, Portland: 7.22603e-10 kg
- cement, unspecified: 2.18924e-6, 8.21389e-9, 5.37267e-9, 1.76315e-9, 2.17391e-7, 5.72419e-8, 6.82365e-9, 2.70323e-9, 3.48833e-8, 7.52034e-8 kg (10 suppliers, which the file names only by identifier); sum of these 2.59883e-6 kg
- ceramic tile: 8.43856e-6 kg
- charger, for electric scooter: 8.37407e-8 kg
- chemical, organic: 2.73128e-8 kg
- chromium: 3.6933e-8 kg
- chromium steel removed by turning, average, conventional: 3.04558e-7 kg
- coating powder: 3.16666e-6, 1.56388e-6 kg (2 suppliers, which the file names only by identifier); sum of these 4.73054e-6 kg
- concrete, normal strength: 3.86984e-8, 3.53309e-8, 5.52746e-9, 5.62003e-6, 8.49798e-9, 3.61253e-8, 6.87971e-8, 2.91755e-6, 1.62606e-7, 6.49896e-8 m3 (10 suppliers, which the file names only by identifier); sum of these 8.95816e-6 m3
- controller, for electric scooter: 3.51573e-8 kg
- copper scrap, sorted, pressed: -8.7736e-9 kg
- copper, cathode: 0.000116602 kg
- corrugated board box: 3.14072e-5, 7.28995e-5, 1.16992e-6 kg (3 suppliers, which the file names only by identifier); sum of these 0.000105477 kg
- diesel, burned in agricultural machinery: 0.00149533 MJ
- diesel, burned in building machine: 0.000115547 MJ
- door, inner, wood: 1.27076e-8 m2
- electric motor, for electric scooter: 1.60561e-7 kg
- electricity, low voltage: 2.43382e-5, 4.82327e-5, 0.000463326, 8.26505e-6, 6.92729e-6, 0.000165591, 1.50303e-6, 0.000114781, 3.38002e-5 kWh (9 suppliers, which the file names only by identifier); sum of these 0.000866765 kWh
- electricity, medium voltage: 2.54664e-7, 7.16739e-7, 0.0240182, 6.85146e-8, 1.90867e-8, 2.32873e-7, 2.50354e-5, 3.23355e-8, 1.23102e-6, 8.41233e-6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 kWh (50 suppliers, which the file names only by identifier); sum of these 0.0241583 kWh
- electronics scrap from control units: -1.26415e-7 kg
- electronics, for control units: 1.26415e-7 kg
- elevator, hydraulic: 8.7952e-10 unit
- epoxy resin, liquid: 5.38327e-6, 1.13401e-6 kg (2 suppliers, which the file names only by identifier); sum of these 6.51727e-6 kg
- ethylene: 1.84197e-7, 9.75442e-8, 2.95539e-9 kg (3 suppliers, which the file names only by identifier); sum of these 2.84696e-7 kg
- ethylene glycol: 0.000291411 kg
- ethylene glycol monoethyl ether: 6.26641e-7 kg
- excavation, hydraulic digger: 1.23074e-9, 6.07268e-6 m3 (2 suppliers, which the file names only by identifier); sum of these 6.07391e-6 m3
- extrusion, plastic film: 1.46558e-10 kg
- fibre, viscose: 7.09742e-6 kg
- flat glass, coated: 7.14317e-5 kg
- flat glass, uncoated: 2.21533e-6, 1.07013e-5 kg (2 suppliers, which the file names only by identifier); sum of these 1.29166e-5 kg
- glass fibre reinforced plastic, polyamide, injection moulded: 2.6801e-6 kg
- glass fibre reinforced plastic, polyester resin, hand lay-up: 1.71947e-7 kg
- glass tube, borosilicate: 5.51753e-5 kg
- glass wool mat: 5.84835e-7 kg
- gypsum plasterboard: 0.000126111 kg
- heat, central or small-scale, natural gas: 2.01934e-12, 1.93538e-5 MJ (2 suppliers, which the file names only by identifier); sum of these 1.93538e-5 MJ
- heat, district or industrial, natural gas: 0.0260137, 0.000503556, 0.00136353, 2.24063e-5 MJ (4 suppliers, which the file names only by identifier); sum of these 0.0279032 MJ
- heat, district or industrial, other than natural gas: 0.000703587 MJ
- hot water tank factory: 1.84652e-13 unit
- industrial machine, heavy, unspecified: 2.60702e-7 kg
- inert waste: -1.02161e-5 kg
- inert waste, for final disposal: -7.69666e-8, -2.52187e-6 kg (2 suppliers, which the file names only by identifier); sum of these -2.59883e-6 kg
- injection moulding: 0.000553574 kg
- isopropanol: 2.60702e-6 kg
- lead: 0.000542171 kg
- light emitting diode: 4.30166e-8 kg
- light fuel oil: 1.36478e-8 kg
- lubricating oil: 0.000212411, 4.38296e-5 kg (2 suppliers, which the file names only by identifier); sum of these 0.00025624 kg
- magnesium: 2.74384e-7 kg
- maintenance, transmission network, electricity, high voltage direct current aerial line: 1.55192e-6, 4.7364e-8 km*year (2 suppliers, which the file names only by identifier); sum of these 1.59928e-6 km*year
- maize starch: 2.05691e-7 kg
- metal working, average for aluminium product manufacturing: 2.69015e-7 kg
- metal working, average for steel product manufacturing: 1.42827e-10 kg
- natural stone plate, cut: 2.2857e-7 kg
- nickel, class 1: 2.15448e-8 kg
- nylon 6: 8.03833e-7, 3.96979e-7 kg (2 suppliers, which the file names only by identifier); sum of these 1.20081e-6 kg
- packaging box factory: 2.47097e-13 unit
- palladium: 1.2489e-8 kg
- paper, woodcontaining, lightweight coated: 5.38602e-9 kg
- paper, woodfree, coated: 0.00166227 kg
- platinum: 6.66081e-8 kg
- plywood: 7.27136e-9 m3
- polyethylene terephthalate, granulate, amorphous: 6.00406e-7 kg
- polyethylene, high density, granulate: 0.000651507 kg
- polyethylene, low density, granulate: 6.00406e-6 kg
- polyphenylene sulfide: 0.00114483 kg
- polypropylene, granulate: 2.2107e-5 kg
- polyurethane, flexible foam: 9.35378e-6, 1.91583e-6 kg (2 suppliers, which the file names only by identifier); sum of these 1.12696e-5 kg
- polyvinylchloride, bulk polymerised: 1.46358e-5 kg
- polyvinylchloride, emulsion polymerised: 4.37071e-7 kg
- polyvinylchloride, suspension polymerised: 7.05081e-6 kg
- printed wiring board, mounted mainboard, desktop computer, Pb free: 8.17445e-7 kg
- printing ink, offset, without solvent, in 47.5% solution state: 1.10858e-5 kg
- reinforcing steel: 0.00202321 kg
- road: 2.29845e-6 m*year
- road vehicle factory: 3.25034e-12 unit
- sanitary ceramics: 1.54892e-6 kg
- sawnwood, beam, softwood, dried (u=10%), planed: 7.2082e-10 m3
- scrap copper: -4.56501e-7, -9.65708e-6, -2.03339e-5 kg (3 suppliers, which the file names only by identifier); sum of these -3.04474e-5 kg
- scrap steel: -5.4877e-8, -0.000230706, -3.83612e-5 kg (3 suppliers, which the file names only by identifier); sum of these -0.000269122 kg
- section bar extrusion, aluminium: 4.31425e-7 kg
- section bar rolling, steel: 3.12409e-6 kg
- sheet rolling, aluminium: 3.2191e-5 kg
- sheet rolling, chromium steel: 4.92862e-6 kg
- sheet rolling, steel: 0.000260438 kg
- spent solvent mixture: -1.3169e-6, -2.47762e-10, -5.03984e-7 kg (3 suppliers, which the file names only by identifier); sum of these -1.82113e-6 kg
- steel, chromium steel 18/8: 4.92862e-6 kg
- steel, chromium steel 18/8, hot rolled: 0.000113321 kg
- steel, low-alloyed: 0.000186642 kg
- steel, low-alloyed, hot rolled: 0.00455894 kg
- steel, unalloyed: 0.000696066 kg
- sulfuric acid: 3.6814e-5, 4.81605e-6 kg (2 suppliers, which the file names only by identifier); sum of these 4.16301e-5 kg
- synthetic rubber: 0.000158367 kg
- tap water: 9.4288e-12, 0.0359757, 3.92933e-10, 1.55826e-11, 7.00752e-12, 2.90764e-11, 4.49653e-9, 1.0222e-11, 0.0038485 kg (9 suppliers, which the file names only by identifier); sum of these 0.0398242 kg
- tempering, flat glass: 1.2905e-5 kg
- textile, woven cotton: 3.37238e-7 kg
- thermoforming, with calendering: 4.7596e-7 kg
- tissue paper: 2.23121e-9 kg
- used door, inner, wood: -1.27076e-8 m2
- used glider, electric scooter: -1.83987e-5 kg
- used glider, passenger car: -0.000322463 kg
- used internal combustion engine, passenger car: -0.0114483 kg
- used powertrain, electric scooter: -2.79597e-7 kg
- used window frame, wood-metal: -7.67284e-8 m2
- waste aluminium: -3.29755e-5 kg
- waste concrete: -2.3626e-6, -0.0209381, -0.000235891 kg (3 suppliers, which the file names only by identifier); sum of these -0.0211763 kg
- waste emulsion paint: -3.08187e-7, -2.9051e-8 kg (2 suppliers, which the file names only by identifier); sum of these -3.37238e-7 kg
- waste glass: -1.98881e-7, -4.76388e-7, -7.71853e-5, -4.44463e-8, -1.83805e-6, -6.74942e-8, -4.87105e-5, -1.08076e-8, -1.16494e-8 kg (9 suppliers, which the file names only by identifier); sum of these -0.000128544 kg
- waste graphical paper: -6.97435e-12, -4.18123e-13, -7.0734e-12, -2.89326e-12, -2.21978e-12, -3.68153e-12, -1.39947e-12, -8.5371e-12, -1.42972e-13, -4.67521e-13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 kg (42 suppliers, which the file names only by identifier); sum of these -2.23121e-9 kg
- waste gypsum plasterboard: -0.000126111 kg
- waste mineral oil: -1.73951e-8, -5.08253e-6, -1.5137e-7 kg (3 suppliers, which the file names only by identifier); sum of these -5.2513e-6 kg
- waste paper, unsorted: -0.000233197, -0.000233197 kg (2 suppliers, which the file names only by identifier); sum of these -0.000466393 kg
- waste paperboard, unsorted: -5.27383e-5, -5.27383e-5 kg (2 suppliers, which the file names only by identifier); sum of these -0.000105477 kg
- waste plastic, industrial electronics: -2.49553e-8, -1.65185e-6 kg (2 suppliers, which the file names only by identifier); sum of these -1.67681e-6 kg
- waste plastic, mixture: -1.93124e-5, -6.85974e-8, -1.37323e-8, -9.75892e-8, -1.84044e-9, -6.72467e-9, -1.22987e-8, -7.4761e-9, -8.55077e-9, -9.12561e-8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 kg (44 suppliers, which the file names only by identifier); sum of these -0.0001739 kg
- waste polyethylene: -7.04845e-7, -1.84714e-8, -4.9343e-6, -4.7095e-8, -3.56172e-9, -1.94519e-8, -7.85836e-9, -6.10877e-7 kg (8 suppliers, which the file names only by identifier); sum of these -6.34647e-6 kg
- waste polyethylene/polypropylene product: -1.27053e-6, -5.01168e-7, -1.50387e-8 kg (3 suppliers, which the file names only by identifier); sum of these -1.78673e-6 kg
- waste polypropylene: -1.83012e-13, -2.90962e-14, -7.74462e-14, -2.21623e-12, -2.12773e-14, -3.24034e-13, -1.05023e-12, -3.14696e-13, -3.91197e-13, -8.37711e-15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 kg (42 suppliers, which the file names only by identifier); sum of these -2.83957e-9 kg
- waste polyvinylchloride: -1.46358e-5 kg
- waste polyvinylchloride product: -2.88169e-8, -2.44481e-6, -9.50078e-7 kg (3 suppliers, which the file names only by identifier); sum of these -3.42371e-6 kg
- waste reinforced concrete: -9.7731e-6, -1.03553e-7, -0.000139479 kg (3 suppliers, which the file names only by identifier); sum of these -0.000149356 kg
- waste rubber, unspecified: -2.9532e-7, -7.03481e-6, -7.03481e-6 kg (3 suppliers, which the file names only by identifier); sum of these -1.43649e-5 kg
- waste wire plastic: -8.8008e-8, -5.82541e-6 kg (2 suppliers, which the file names only by identifier); sum of these -5.91342e-6 kg
- waste wood, untreated: -6.29134e-6 kg
- wastewater, average: -4.28324e-12, -3.8485e-6 m3 (2 suppliers, which the file names only by identifier); sum of these -3.8485e-6 m3
- welding, arc, steel: 6.5529e-8 m
- white spirit: 3.64744e-6 kg
- window frame, aluminium, U=1.6 W/m2K: 2.64448e-6 m2
- window frame, wood-metal, U=1.6 W/m2K: 7.67284e-8 m2
- wire drawing, copper: 8.66891e-5 kg
- zinc: 2.14973e-5 kg
- zinc coat, pieces: 2.62971e-7 m2

## Inputs from nature
- Occupation, industrial area [natural resource, land]: 0.00015383 m2*year
- Occupation, urban, continuously built [natural resource, land]: 4.48794e-5 m2*year
- Transformation, from annual crop [natural resource, land]: 9.31582e-7 m2
- Transformation, from arable land, unspecified use [natural resource, land]: 3.00983e-10 m2
- Transformation, from forest, unspecified [natural resource, land]: 7.43907e-7 m2
- Transformation, from pasture, man made [natural resource, land]: 4.33992e-6 m2
- Transformation, from urban, green area [natural resource, land]: 5.98392e-7 m2
- Transformation, to industrial area [natural resource, land]: 6.01571e-6 m2
- Transformation, to urban, continuously built [natural resource, land]: 5.98392e-7 m2

## Emissions to nature
- 2-Propanol [air, urban air close to ground]: 2.60702e-6 kg
- Benzene, ethyl- [air, urban air close to ground]: 1.15881e-7 kg
- Heptane [air, urban air close to ground]: 1.13369e-6 kg
- Methanol [air, urban air close to ground]: 1.19588e-7 kg
- NMVOC, non-methane volatile organic compounds [air, unspecified]: 5.36333e-5 kg
- Propylene oxide [air, urban air close to ground]: 2.1765e-7 kg
- Toluene [air, urban air close to ground]: 1.02367e-7 kg
- Water [air, unspecified]: 5.39635e-6 m3
- Xylene [air, urban air close to ground]: 1.02367e-7 kg
- BOD5, Biological Oxygen Demand [water, surface water]: 4.00125e-10 kg
- BOD5, Biological Oxygen Demand [water, unspecified]: 2.90007e-7 kg
- COD, Chemical Oxygen Demand [water, surface water]: 2.97e-9 kg
- COD, Chemical Oxygen Demand [water, unspecified]: 2.15276e-6 kg
- DOC, Dissolved Organic Carbon [water, surface water]: 1.1e-9 kg
- DOC, Dissolved Organic Carbon [water, unspecified]: 7.97313e-7 kg
- Phosphate [water, surface water]: 1.53891e-11 kg
- Phosphate [water, unspecified]: 1.11541e-8 kg
- TOC, Total Organic Carbon [water, surface water]: 1.1e-9 kg
- TOC, Total Organic Carbon [water, unspecified]: 7.97313e-7 kg
- Water [water, unspecified]: 3.05793e-5 m3

## Sampling procedure
Literature / Survey

## Extrapolations
see Geography This dataset is based on data covering the geography RER. The uncertainty has been adjusted accordingly. The percent representativeness has been reported as zero for lack of information.
