# uranium mill construction

Dataset: EcoSpold 2, unit process
Geography: RoW
Time period: 1980-01-01 to 2022-12-31
Technology level: current
Classification: ISIC rev.4 ecoinvent: 4100:Construction of buildings
Classification: EcoSpold01Categories: nuclear power/production
Tags: ConvertedDataset
Scenario: Business-as-Usual
System model: Allocation at the point of substitution
Generated by: Roberto Dones
Published in: Dones, R. 2007
Database: ecoinvent
isCopyrightProtected: true

## General comment
Assuming that the buildings of the model mill cover an area 100 m * 200 m. The model mill is assumed to produce 490 tonnes of natural uranium in yellowcake U3O8 per year over a lifetime of 15 years. All necessary electricity is assumed to be produced on site by diesel generators.
[This dataset was already contained in the ecoinvent database version 2. It was not individually updated during the transfer to ecoinvent version 3. Life Cycle Impact Assessment results may still have changed, as they are affected by changes in the supply chain, i.e. in other datasets. This dataset was generated following the ecoinvent quality guidelines for version 2. It may have been subject to central changes described in the ecoinvent version 3 change report (http://www.ecoinvent.org/database/ecoinvent-version-3/reports-of-changes/), and the results of the central updates were reviewed extensively. The changes added e.g. consistent water flows and other information throughout the database. The documentation of this dataset can be found in the ecoinvent reports of version 2, which are still available via the ecoinvent website. The change report linked above covers all central changes that were made during the conversion process.]

## Included activities end
This module includes the metal and concrete as well as the energy requirements for the construction of the model mill. Also the transport of these materials and the land use are included.

## Geography
US data.

## Technology
Average conditions.

## Reference product
- uranium mill: 1 unit; By-product classification allocatable product; CPC 53269: Other constructions for manufacturing
  EcoSpold01Location=US
  production volume 2.90057 unit
    This is a placeholder value that does not reflect real-world production volumes. This dataset does not currently require a real-world production volume to work in the database framework, and no actual data were collected yet. This has no negative effect on the results of the ecoinvent database.
  property price 4.1024e7 EUR2005
    Calculated based on inputs: The price of the product has been calculated as a sum of the values of the material and energy inputs for this product. This value is therefore a rough estimation. It may underestimate the real price since there are additional expenses when producing any product. These expences can include for example labour costs, treatment of waste materials and profit for the producer. Please consider carefully whether this level of data quality is acceptable for your application.
  properties: carbon allocation 0 kg, carbon content 0

## Inputs from technosphere
- aluminium, cast alloy: 124800 kg
  EcoSpold01Location=RER
  properties: dry mass 1 kg, wet mass 1 kg
- aluminium, wrought alloy: 265200 kg
  EcoSpold01Location=RER
  properties: dry mass 1 kg, wet mass 1 kg
- concrete, normal strength: 1318.1, 251.401, 188.27, 2777.85, 289.448, 2343.29, 99374.2, 457.499 m3 (8 suppliers, which the file names only by identifier); sum of these 107000 m3; lognormal variance with pedigree 0.162, pedigree (1,1,5,5,1)
  old reference for unit mill
  EcoSpold01Location=CH
  properties: dry mass 2190 kg, water content 0.086758, wet mass 2380 kg
- copper, cathode: 390000 kg; lognormal variance with pedigree 0.162, pedigree (1,1,5,5,1)
  EcoSpold01Location=RER
  old reference for unit mill
  properties: dry mass 1 kg, wet mass 1 kg
- diesel, burned in diesel-electric generating set, 10MW: 3.54e8 MJ; lognormal variance with pedigree 0.162, pedigree (1,1,5,5,1)
  old reference for unit mill
  EcoSpold01Location=GLO
  properties: heating value, net 1 MJ
- plywood: 15.3484, 325.652 m3 (2 suppliers, which the file names only by identifier); sum of these 341 m3; lognormal variance with pedigree 0.162, pedigree (1,1,5,5,1)
  EcoSpold01Location=RER
  old reference for unit mill
  properties: carbon content, fossil 0.09783, carbon content, non-fossil 0.409818, dry mass 768.6 kg, heating value, net 11688.9 MJ, price 400 EUR2005, water content 0.070778, wet mass 823 kg
- polyethylene, high density, granulate: 266000 kg; lognormal variance with pedigree 0.162, pedigree (1,1,5,5,1)
  EcoSpold01Location=RER
  old reference for unit mill
  properties: carbon content, fossil 0.857143, dry mass 1 kg, heating value, net 42.47 MJ, wet mass 1 kg
  note on carbon content, fossil: Polyethylene is formed out of a huge amount of ethylene monomers (C2H4) (ecoinvent v2.2 report 11_II). MW=28 g/mol
- reinforcing steel: 1.28e7 kg; lognormal variance with pedigree 0.162, pedigree (1,1,5,5,1)
  old reference for unit mill
  EcoSpold01Location=RER
  properties: carbon content, fossil 0.004, dry mass 1 kg, wet mass 1 kg
- steel, chromium steel 18/8, hot rolled: 3.19e6 kg; lognormal variance with pedigree 0.342, pedigree (1,1,5,5,1)
  EcoSpold01Location=RER
  old reference for unit mill & uncertainty on steel type
  properties: carbon content, fossil 0.0008, dry mass 1 kg, wet mass 1 kg
  note on carbon content, fossil: Stainless steel model is the grade 304 steel (18/8 stainless, 18% chromium 8% nickel; max. 0.08% C)
- steel, low-alloyed, hot rolled: 9.56e6 kg; lognormal variance with pedigree 0.342, pedigree (1,1,5,5,1)
  EcoSpold01Location=RER
  old reference for unit mill & uncertainty on steel type
  properties: carbon content, fossil 0.005, dry mass 1 kg, wet mass 1 kg
  note on carbon content, fossil: Low alloyed steel composition given in Tab. 3.2 ecoinvent v2.2 report 10_partII. Steel assumed to have a C content of 0.5%

## Inputs from nature
- Occupation, industrial area [natural resource, land]: 1e6 m2*year; lognormal variance with pedigree 0.252, pedigree (1,1,5,5,1)
  own estimation, based on range of data
- Transformation, from industrial area [natural resource, land]: 20000 m2; lognormal variance with pedigree 0.162, pedigree (1,1,5,5,1)
  own estimation, based on range of data
- Transformation, from unspecified [natural resource, land]: 20000 m2; lognormal variance with pedigree 0.162, pedigree (1,1,5,5,1)
  own estimation, based on range of data
- Transformation, to industrial area [natural resource, land]: 20000 m2; lognormal variance with pedigree 0.162, pedigree (1,1,5,5,1)
  own estimation, based on range of data
- Transformation, to unspecified [natural resource, land]: 20000 m2; lognormal variance with pedigree 0.162, pedigree (1,1,5,5,1)
  own estimation, based on range of data

## Sampling procedure
Literature

## Extrapolations
none This dataset has been copied from an original dataset covering the geography US. The uncertainty has been adjusted accordingly.

## Review by Roberto Dones 2006-10-17
passed
