# maintenance, solid oxide fuel cell, with micro gas turbine, 180kW electrical, future

Dataset: EcoSpold 2, unit process
Geography: RoW
Time period: 2000-01-01 to 2022-12-31
Technology level: current
Classification: EcoSpold01Categories: natural gas/cogeneration
Classification: ISIC rev.4 ecoinvent: 3314:Repair of electrical equipment
Synonyms: SOFC gas turbine hybrid; SOFC Gasturbinen Hybridsystem; Festoxid Brennstoffzellen Gasturbinen Hybridsystem; solid oxide fuel cell hybrid cycle power system
Tags: ConvertedDataset
Scenario: Business-as-Usual
System model: Allocation at the point of substitution
Generated by: Alex Primas
Published in: Primas A. 2007
Database: ecoinvent
isCopyrightProtected: true

## General comment
The module reflects the maintenance for a hybrid solid oxide fuel cell (SOFC) micro gas turbine system with 180 kW electrical output. Inventory based on information from literature and one manufacturer. Life time for operation of auxiliary systems 80'000 h, stack lifetime 48'000 h. Maintenance is carried out every 8000 h. Desulpurising catalyst replacement every 8'000 h.
[This dataset was already contained in the ecoinvent database version 2. It was not individually updated during the transfer to ecoinvent version 3. Life Cycle Impact Assessment results may still have changed, as they are affected by changes in the supply chain, i.e. in other datasets. This dataset was generated following the ecoinvent quality guidelines for version 2. It may have been subject to central changes described in the ecoinvent version 3 change report (http://www.ecoinvent.org/database/ecoinvent-version-3/reports-of-changes/), and the results of the central updates were reviewed extensively. The changes added e.g. consistent water flows and other information throughout the database. The documentation of this dataset can be found in the ecoinvent reports of version 2, which are still available via the ecoinvent website. The change report linked above covers all central changes that were made during the conversion process.]

## Included activities end
The module includes an estimation for materials and transport used for the maintenance of the hybrid SOFC-GT fuel cell micro gas turbine unit.

## Geography
Process applicable in central European conditions.

## Technology
Hybrid system combining a 125 kWe solid oxide fuel cell (SOFC) with tubular stack design and a 55kWe micro gas turbine. For central cogeneration use. Performance, stack lifetime and catalyst use according to expected future values for a serial product. Operation with connection to low pressure gas network. Electrical efficiency 58%, total efficiency 80%.

## Reference product
- maintenance, solid oxide fuel cell, with micro gas turbine, 180kW electrical, future: 1 unit; By-product classification allocatable product; CPC 87152: Maintenance and repair services of electrical machinery and apparatus n.e.c.
  EcoSpold01Location=CH
  production volume 3.96633 unit
    This is a placeholder value that does not reflect real-world production volumes. This dataset does not currently require a real-world production volume to work in the database framework, and no actual data were collected yet. This has no negative effect on the results of the ecoinvent database.
  property price 1362.52 EUR2005
    Calculated based on inputs: The price of the product has been calculated as a sum of the values of the material and energy inputs for this product. This value is therefore a rough estimation. It may underestimate the real price since there are additional expenses when producing any product. These expences can include for example labour costs, treatment of waste materials and profit for the producer. Please consider carefully whether this level of data quality is acceptable for your application.
  properties: carbon allocation 0 kg, carbon content 0

## Inputs from technosphere
- maintenance, micro gas turbine, 100kW electrical: 0.55 unit; lognormal variance with pedigree 0.0986, pedigree (5,5,5,5,3)
  EcoSpold01Location=CH
  Input, data of 100kWel unit used for 55kWel plant
  Uncertainty: input, data of 100kWel unit used for 55kWel plant
- maintenance, solid oxide fuel cell, 125kW electrical, future: 1 unit; lognormal variance with pedigree 0.0906, pedigree (5,5,5,5,1)
  Material input
  EcoSpold01Location=CH
  Uncertainty: material input

## Sampling procedure
Literature data and manufacturer information

## Extrapolations
none This dataset has been copied from an original dataset covering the geography CH. The uncertainty has been adjusted accordingly.

## Review by Rolf Frischknecht 2007-08-13
passed
none
