# treatment of copper slag, residual material landfill

Dataset: EcoSpold 2, unit process
Geography: GLO
Time period: 2017-01-01 to 2022-12-31
Technology level: current
Classification: ISIC rev.4 ecoinvent: 3822:Treatment and disposal of hazardous waste
Scenario: Business-as-Usual
System model: Allocation at the point of substitution
Generated by: David FitzGerald
Published in: Doka G. 2009
Database: ecoinvent
isCopyrightProtected: true

## General comment
This activity represents the disposal of copper slag in a residual material landfill. The inventoried waste contains 100% copper slag.
Waste composition (wet, in ppm): H2O n.a.; O n.a.; H n.a.; C n.a.; S n.a.; N n.a.; P n.a.; B n.a.; Cl n.a.; Br n.a.; F n.a.; I n.a.; Ag 40; As 630; Ba 2400; Cd 40; Co n.a.; Cr 280; Cu 8070; Hg 20; Mn 400; Mo n.a.; Ni 2110; Pb 710; Sb n.a.; Se 70; Sn n.a.; V n.a.; Zn 6060; Be n.a.; Sc n.a.; Sr n.a.; Ti n.a.; Tl n.a.; W n.a.; Si 155000; Fe 379000; Ca 7130; Al 26700; K 31700; Mg 4850; Na 8000.
Reference:
a: Lim, T.-T., & Chu, J. (2006). Assessment of the use of spent copper slag for land reclamation. Waste Management & Research, 24(1), 67–73. https://doi.org/10.1177/0734242X06061769

## Included activities start
Activity starts with the reception of the slag.

## Included activities end
This activity includes waste-specific short-term emissions to water from leachate and long-term emissions from the landfill to ground water.

## Geography
Technology encountered in Switzerland in 2000. Landfill includes base seal and leachate collection system.

## Technology
Residual material landfill for polluted, inorganic waste. With base seal and leachate collection system. Recultivation after closure.

## Reference product
- copper slag: -1 kg; By-product classification Waste; CPC 39361: Waste and scrap of copper
  production volume 7.115e8 kg
    Rough estimation based on the total volume of copper slag produced by other datasets in the database.
  property price 0 EUR2005
    Waste products are assigned a price of zero as they are assumed to require further treatment.
  properties: aluminium content 0.0267, arsenic content 0.00063, barium content 0.0024, cadmium content 4e-5, calcium content 0.00713, carbon allocation 0 kg, carbon content 0, carbon content, fossil 0, carbon content, non-fossil 0, chromium content 0.00028, copper content 0.00807, dry mass 1 kg, iron content 0.379, lead content 0.00071, magnesium content 0.00485, manganese content 0.0004, mercury content 2e-5, nickel content 0.00211, potassium content 0.0317, selenium content 7e-5, silicon content 0.155, silver content 4e-5, sodium content 0.008, tungsten content 0.23999, water content 0, water in wet mass 0 kg, wet mass 1 kg, zinc content 0.00606

## Inputs from technosphere
- process-specific burdens, residual material landfill: 0.280494, 0.71109, 0.00841689 kg (3 suppliers, which the file names only by identifier); sum of these 1 kg; lognormal variance with pedigree 0.082, pedigree (1,1,5,5,4)
  Demands per kilogram of slag. The uncertainty is considered in the supplying activity.
- residual material landfill: 2.08333e-9 unit; lognormal variance with pedigree 0.082, pedigree (1,1,5,5,4)
  Demands per kilogram of slag. The uncertainty is considered in the supplying activity.

## Emissions to nature
- Aluminium III [water, ground-, long-term]: 0.00792596 kg; lognormal variance with pedigree 0.704905, pedigree (1,1,5,5,4)
  The uncertainty is calculated from uncertainties in waste composition and transfer coefficients in incinerators and landfills.
- Aluminium III [water, surface water]: 1.3232e-5 kg; lognormal variance with pedigree 1.0806, pedigree (1,1,5,5,4)
  (same comment as for Aluminium III)
- Arsenic ion [water, ground-, long-term]: 6.3e-13 kg; lognormal variance with pedigree 0.82375, pedigree (1,1,5,5,4)
  (same comment as for Aluminium III)
- Arsenic ion [water, surface water]: 0.00063 kg; lognormal variance with pedigree 0.800113, pedigree (1,1,5,5,4)
  (same comment as for Aluminium III)
- Barium II [water, ground-, long-term]: 1.98247e-5 kg; lognormal variance with pedigree 6.37763, pedigree (1,1,5,5,4)
  (same comment as for Aluminium III)
- Barium II [water, surface water]: 3.30963e-8 kg; lognormal variance with pedigree 1.84408, pedigree (1,1,5,5,4)
  (same comment as for Aluminium III)
- Cadmium II [water, ground-, long-term]: 2.71555e-7 kg; lognormal variance with pedigree 7.39718, pedigree (1,1,5,5,4)
  (same comment as for Aluminium III)
- Cadmium II [water, surface water]: 4.53348e-10 kg; lognormal variance with pedigree 2.40938, pedigree (1,1,5,5,4)
  (same comment as for Aluminium III)
- Calcium II [water, ground-, long-term]: 0.000644254 kg; lognormal variance with pedigree 1.93504, pedigree (1,1,5,5,4)
  (same comment as for Aluminium III)
- Calcium II [water, surface water]: 1.07555e-6 kg; lognormal variance with pedigree 1.39144, pedigree (1,1,5,5,4)
  (same comment as for Aluminium III)
- Chromium VI [water, ground-, long-term]: 5.31685e-5 kg; lognormal variance with pedigree 0.913831, pedigree (1,1,5,5,4)
  (same comment as for Aluminium III)
- Chromium VI [water, surface water]: 1.68315e-5 kg; lognormal variance with pedigree 1.07489, pedigree (1,1,5,5,4)
  (same comment as for Aluminium III)
- Copper ion [water, ground-, long-term]: 0.000310651 kg; lognormal variance with pedigree 3.12762, pedigree (1,1,5,5,4)
  (same comment as for Aluminium III)
- Copper ion [water, surface water]: 5.18616e-7 kg; lognormal variance with pedigree 1.48933, pedigree (1,1,5,5,4)
  (same comment as for Aluminium III)
- Iron ion [water, ground-, long-term]: 0.00189954 kg; lognormal variance with pedigree 7.11987, pedigree (1,1,5,5,4)
  (same comment as for Aluminium III)
- Iron ion [water, surface water]: 3.17118e-6 kg; lognormal variance with pedigree 1.39146, pedigree (1,1,5,5,4)
  (same comment as for Aluminium III)
- Lead II [water, ground-, long-term]: 3.68285e-6 kg; lognormal variance with pedigree 7.70547, pedigree (1,1,5,5,4)
  (same comment as for Aluminium III)
- Lead II [water, surface water]: 6.14832e-9 kg; lognormal variance with pedigree 2.0632, pedigree (1,1,5,5,4)
  (same comment as for Aluminium III)
- Magnesium [water, ground-, long-term]: 0.000551071 kg; lognormal variance with pedigree 1.72027, pedigree (1,1,5,5,4)
  (same comment as for Aluminium III)
- Magnesium [water, surface water]: 9.19985e-7 kg; lognormal variance with pedigree 1.40865, pedigree (1,1,5,5,4)
  (same comment as for Aluminium III)
- Manganese II [water, ground-, long-term]: 3.30412e-6 kg; lognormal variance with pedigree 6.61109, pedigree (1,1,5,5,4)
  (same comment as for Aluminium III)
- Manganese II [water, surface water]: 5.51605e-9 kg; lognormal variance with pedigree 2.07754, pedigree (1,1,5,5,4)
  (same comment as for Aluminium III)
- Mercury II [water, ground-, long-term]: 9.44035e-7 kg; lognormal variance with pedigree 3.58878, pedigree (1,1,5,5,4)
  (same comment as for Aluminium III)
- Mercury II [water, surface water]: 1.57602e-9 kg; lognormal variance with pedigree 2.2452, pedigree (1,1,5,5,4)
  (same comment as for Aluminium III)
- Nickel II [water, ground-, long-term]: 0.000763899 kg; lognormal variance with pedigree 0.901011, pedigree (1,1,5,5,4)
  (same comment as for Aluminium III)
- Nickel II [water, surface water]: 1.27529e-6 kg; lognormal variance with pedigree 1.36142, pedigree (1,1,5,5,4)
  (same comment as for Aluminium III)
- Potassium I [water, ground-, long-term]: 0.0227643 kg; lognormal variance with pedigree 0.321308, pedigree (1,1,5,5,4)
  (same comment as for Aluminium III)
- Potassium I [water, surface water]: 0.00893574 kg; lognormal variance with pedigree 0.359613, pedigree (1,1,5,5,4)
  (same comment as for Aluminium III)
- Selenium IV [water, ground-, long-term]: 4.53139e-5 kg; lognormal variance with pedigree 1.09692, pedigree (1,1,5,5,4)
  (same comment as for Aluminium III)
- Selenium IV [water, surface water]: 2.46861e-5 kg; lognormal variance with pedigree 1.12107, pedigree (1,1,5,5,4)
  (same comment as for Aluminium III)
- Silicon [water, ground-, long-term]: 0.154651 kg; lognormal variance with pedigree 0.166507, pedigree (1,1,5,5,4)
  (same comment as for Aluminium III)
- Silicon [water, surface water]: 0.000348587 kg; lognormal variance with pedigree 0.71522, pedigree (1,1,5,5,4)
  (same comment as for Aluminium III)
- Silver I [water, ground-, long-term]: 1.53978e-6 kg; lognormal variance with pedigree 3.81838, pedigree (1,1,5,5,4)
  (same comment as for Aluminium III)
- Silver I [water, surface water]: 2.57059e-9 kg; lognormal variance with pedigree 2.1801, pedigree (1,1,5,5,4)
  (same comment as for Aluminium III)
- Sodium I [water, ground-, long-term]: 0.00499777 kg; lognormal variance with pedigree 0.482226, pedigree (1,1,5,5,4)
  (same comment as for Aluminium III)
- Sodium I [water, surface water]: 0.00300223 kg; lognormal variance with pedigree 0.502683, pedigree (1,1,5,5,4)
  (same comment as for Aluminium III)
- Zinc II [water, ground-, long-term]: 7.42714e-5 kg; lognormal variance with pedigree 5.35405, pedigree (1,1,5,5,4)
  (same comment as for Aluminium III)
- Zinc II [water, surface water]: 1.23992e-7 kg; lognormal variance with pedigree 1.67573, pedigree (1,1,5,5,4)
  (same comment as for Aluminium III)

## Sampling procedure
The waste composition was derived from literature and is given in the general comment. The unit process was created with a landfill model that is based on observed leachate concentrations in literature. The model extrapolates to 60'000 years while considering chemical characteristics.

Reference for the model:
Doka G. (2009) Life Cycle Inventories of Waste Treatment Services. ecoinvent report No. 13. Swiss Centre for Life Cycle Inventories, Dübendorf, 2009. Doka Life Cycle Assessments, Zurich, Switzerland. Available at http://www.doka.ch/publications.htm

## Review by Gabor Doka 2019-03-05
passed. Inventory adapted from 2007 eiv2.2 Excel calculation tool for Swiss residual material landfill.
Deposited slag composition is < 1 kg /kg, i.e. relevant mass gaps in waste composition. No data gap filling procedure was employed. Breadth of inventoried pollutants is however acceptable. Landfill infrastructure and process-specific demand have been corrected to represent 1kg of waste.
