# electricity, high voltage, import from AR

Dataset: EcoSpold 2, unit process
Geography: BR-Southern grid
Time period: 2014-01-01 to 2022-12-31
Technology level: current
Classification: ISIC rev.4 ecoinvent: 3510:Electric power generation, transmission and distribution
Scenario: Business-as-Usual
System model: Allocation at the point of substitution
Generated by: Henrique Rogerio Antunes de Souza Junior
Published in: Suppen, N 2017
Database: ecoinvent
isCopyrightProtected: true

## General comment
This dataset represents the amount of imported electricity from AR to BR. The import value is valid for 2014 and includes all electricity imports, independently whether used within the importing country, or re-exported. For a discussion of different ways of modeling electricity trade in LCI, please refer to (Itten & Frischknecht 2014).
[This dataset is meant to replace the following datasets:
- electricity, high voltage, import from AR, BR, 2012 - 2012]

## Included activities start
This activity represents the point of 'handing over' the electricity from one country to the other at the border.

## Included activities end
This dataset doesn't include any electricity losses or transmission infrastructure as these are accounted for in the market datasets.

## Reference product
- electricity, high voltage: 1 kWh; By-product classification allocatable product; CPC 17100: Electrical energy
  production volume 2.46497e9 kWh
    The total electricity import in 2014 was: 615.908 - 581.486 = 34.422 GWh. This data was obtained from the reports of the Ministry of Mines and Energy of Brazil (MME, 2016) for the year 2015 (page 3).
    Of these, 27.539% were imported from Argentina (Matriz de Energia Elétrica, 2017))
    MME (2016). Matrizes Elétricas Estaduais: Ano Referência 2015. Edição de 23 de novembro de 2016. Ministério De Minas E Energia - MME. Secretaria De Planejamento E Desenvolvimento Energético. Núcleo De Estudos Estratégicos De Energia. Available in: <http://www.mme.gov.br/documents/10584/3580498/03+-+Matrizes+El%C3%A9tricas+Estaduais+2016+-+ano+ref.+2015+%28PDF%29/ddfaad8c-a436-4aa8-b619-f95dd2cf689c?version=1.0> Access at 03-2018
    Matrizx de Energia Elétrica (2017). Available in: <http://www2.aneel.gov.br/aplicacoes/capacidadebrasil/OperacaoCapacidadeBrasil.cfm> Access at 03-2018
  property price 0.0977 EUR2005
    Temporary price data. Calculated as 90% of purchasers price based on: 94% of the average price (to account for a 6% loss in transformation and transmission) for electricity for industrial consumersin 2005 (excluded taxes). From IEA.
  properties: carbon allocation 0 kg, carbon content 0

## Inputs from technosphere
- electricity, high voltage: 1 kWh
  activityLink added to better reflect the reality of the supply chain

## Extrapolations
Since the Brazilian matrix is completely interconnected, it is not possible to know the destination of the imported electricity, since it can go anywhere in the country, so the geographic proximity was considered to assign this import to the Southern region.

The Annual Production Volume is estimated considering the fraction of electricity imported from Argentina to the total electricity imported by Brazil.

Fractions are available in:
<http://www2.aneel.gov.br/aplicacoes/capacidadebrasil/OperacaoCapacidadeBrasil.cfm>
Accessed in 04-2018
