# treatment of wastewater from ground granulated blast furnace slag production, wastewater treatment

Dataset: EcoSpold 2, unit process
Geography: RoW
Time period: 2010-01-01 to 2022-12-31
Technology level: current
Classification: ISIC rev.4 ecoinvent: 3700:Sewerage
Scenario: Business-as-Usual
System model: Allocation at the point of substitution
Generated by: Nikolia Stoikou
Database: ecoinvent
isCopyrightProtected: true

## General comment
This dataset represents the treatment of a wastewater, generated from an ordinary transforming activity. Purification in wastewater treatment of 'wastewater from ground granulated blast furnace slag production'. Recommended use of this dataset: to be used for wastewaters, generated from ordinary transforming activities, of equal or similar composition. The wastewater has a content of TOC: 0.00551 kg/m3, COD: 0.02148 kg/m3 and BOD: 0.01039 kg/m3. TOC is equal to C present in the wastewater, COD is calculated as TOC/0.2565 and BOD is calculated as COD/0.53034. Detailed elemental composition can be found in the properties of the wastewater treated. Share of biogenic carbon in the sludge: 0%.

## Included activities start
The activity starts with the wastewater being available at the gate of the treatment facility. Collection and transportation of the wastewater to the treatment plant is not included.

## Included activities end
The activity ends with the wastewater being treated and waste-specific emissions released to the environment. Expenditures from treatment of wastewater in waste treatment plant are included as well as relevant infrastructure of the plant. Emissions from any sludge digestion, biogas generation and utilization (heeding specific wastewater composition) are also included. Waste-specific direct emissions of untreated wastewater and required territory-specific infrastructure for sewers are not contained within this dataset but instead in the regional market datasets for this wastewater.

## Geography
The site has mean annual temperature (MAT) of 16.743579766537 degC, mean annual precipitation (MAP) of 1250.84108527132 mm/year, mean annual actual evaporation (EAT) of 460.58904958214 mm/year. In the WWT plant, 0% of its water input are lost due to evaporation from pools, 0.000271% of water is *gained* from organic mass degradation, and 0.000201% is removed off site via sludge disposal. (References: UN data, 2020. Precipitation, Environment Statistics Database, United Nations Statistics Division Available at: http://data.un.org/Data.aspx?q=precipitation&d=ENV&f=variableID%3a6; World Bank, 2022. Surface area (sq.km), World Bank Group Available at: https://data.worldbank.org/indicator/AG.SRF.TOTL.K2; Doka G.,2021. A model for composition-specific life cycle inventories of regionalised wastewater fates, Zurich, Switzerland. http://www.doka.ch/publications.htm)

## Technology
This is an inventory for the disposal of a selected wastewater in Global. The reference unit is 1 m3 wastewater input. This activity represents the treatment of a specific wastewater in a WWT plant (while direct emissions and sewering are heeded in the upstream market dataset for this wastewater). The size of the treatment plant infrastructure is for a supranational region average territory situation. The assumed size of the WWTP treats 82.2 Mio m3 per year. The mixture of WWTP with one, two, or three stages is 8.2%-41.2%-50.6%. The actual, waste-specific oxygen requirement in the biological stages is 0.0023280505 kg O. The digestion process produces 0.6707752 litres of biogas with an energy content of 0.01484969MJ. 60.5% of the biogas is utilized for energy. The remainder is flared. The gross electric efficiency is 26.564%. The gross thermal efficiency is 47.853%. After digestion, the remaining total sludge mass (dry matter) is 0.004735kg DM.

## Reference product
- iron scrap, sorted, pressed: 1 kg; By-product classification Recyclable; CPC 39310: Slag, dross, scalings and other waste from the manufacture of iron or steel; lognormal variance with pedigree 0.3611, pedigree (1,1,1,1,1)
  scrap output from used infrastructure for wastewater treatment plant.
  Uncertainty: Uncertainty calculated from wastewater technosphere fate uncertainty and treatment infrastructure uncertainty.
  production volume 2423.15 kg
    Calculated in proportion to wastewater reference product.
  property price 0.175 EUR2005
    Temporary price data. Calculated as 90% of purchasers price based on: 2005 import and export prices (total trades (USD) divided by total weight (kg) in biggest economies of the world: EU27, USA, Brasil, China, India, Japan and Russia) from UN Commodity Trade Statistics Database (http://data.un.org/Explorer.aspxDatabase [Accessed 2011.06.20]). Commodity: Waste or scrap, of cast iron
  properties: carbon allocation 0 kg, carbon content 0, carbon content, fossil 0, carbon content, non-fossil 0, dry mass 1 kg, water content 0, water in wet mass 0 kg, wet mass 1 kg

## Inputs from technosphere
- blast furnace: 9.26463e-12 unit
- blast furnace dust: -0.000584903, -0.00594739 kg (2 suppliers, which the file names only by identifier); sum of these -0.00653229 kg
- blast furnace gas: -0.196881 MJ
- blast furnace slag: -0.196894 kg
- blast furnace sludge: -0.00012854, -7.51819e-5, -0.00207147, -0.00072583 kg (4 suppliers, which the file names only by identifier); sum of these -0.00300102 kg
- coke: 6.90661 MJ
- diesel: 2.71861e-7 kg
- dolomite: 0.000134175 kg
- electricity, medium voltage: 1.99603e-6 kWh
- hard coal: 7.2583e-11, 0.0145279, 0.00658745, 0.00872346, 0.0466209, 0.00672233, 0.00982111, 0.00285874, 0.00156315 kg (9 suppliers, which the file names only by identifier); sum of these 0.097425 kg
- heat, district or industrial, other than natural gas: 0.00256309 MJ
- inert waste, for final disposal: -7.73721e-5, -0.000786732 kg (2 suppliers, which the file names only by identifier); sum of these -0.000864104 kg
- iron ore concentrate: 0.097425, 0.0137862 kg (2 suppliers, which the file names only by identifier); sum of these 0.111211 kg
- iron pellet: 0.0179643, 0.2598 kg (2 suppliers, which the file names only by identifier); sum of these 0.277764 kg
- iron sinter: 0.0417352, 0.620911, 0.0610642 kg (3 suppliers, which the file names only by identifier); sum of these 0.72371 kg
- limestone, unprocessed: 0.000121123, 0.000581564, 0.00591344 kg (3 suppliers, which the file names only by identifier); sum of these 0.00661613 kg
- natural gas, high pressure: 1.49926e-5, 6.32841e-6, 3.62445e-5, 1.0756e-5, 0.000608476, 6.2191e-5, 6.78866e-6, 2.00324e-7, 2.41055e-5, 2.53136e-5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 m3 (26 suppliers, which the file names only by identifier); sum of these 0.00199846 m3
- nitrogen, liquid: 0.0014199 kg
- oxygen, liquid: 0.00242699 kg
- refractory, fireclay, packed: 0.001299 kg
- sponge iron: 1.58775e-7 kg
- steam, in chemical industry: 0.00657783 kg
- wastewater from pig iron production: -9.87276e-5, -1.7343e-7, -6.90089e-6 m3 (3 suppliers, which the file names only by identifier); sum of these -0.000105802 m3

## Inputs from nature
- Water, cooling, unspecified natural origin [natural resource, in water]: 0.000686506 m3
- Water, unspecified natural origin [natural resource, in ground]: 3.34934e-5 m3
- Water, unspecified natural origin [natural resource, in water]: 0.00026212 m3

## Emissions to nature
- Carbon dioxide, fossil [air, unspecified]: 0.560664 kg
- Carbon monoxide, fossil [air, unspecified]: 0.000931397 kg
- Dioxins, measured as 2,3,7,8-tetrachlorodibenzo-p-dioxin [air, unspecified]: 1.84806e-15 kg
- Hydrogen sulfide [air, unspecified]: 7.46632e-6 kg
- Lead II [air, unspecified]: 4.80492e-8 kg
- Manganese II [air, unspecified]: 5.17452e-8 kg
- Nickel II [air, unspecified]: 1.1088e-8 kg
- Nitrogen oxides [air, unspecified]: 5.54412e-5 kg
- Particulate Matter, < 2.5 um [air, unspecified]: 1.99586e-5 kg
- Particulate Matter, > 10 um [air, unspecified]: 1.1088e-6 kg
- Particulate Matter, > 2.5 um and < 10um [air, unspecified]: 1.1088e-6 kg
- Sulfur dioxide [air, unspecified]: 9.24031e-5 kg
- Water [air, unspecified]: 0.000325144 m3
- Water [water, unspecified]: 0.000630181 m3
