# treatment of waste electric and electronic equipment, shredding

Dataset: EcoSpold 2, unit process
Geography: GLO
Time period: 2005-01-01 to 2022-12-31
Technology level: current
Classification: EcoSpold01Categories: waste management/recycling
Classification: ISIC rev.4 ecoinvent: 3830:Materials recovery
Tags: ConvertedDataset; Treatment
Scenario: Business-as-Usual
System model: Allocation at the point of substitution
Generated by: Roland Hischier
Published in: Hischier R. 2007
Database: ecoinvent
isCopyrightProtected: true

## General comment
Data are based on literature. Infrastructure and transportation efforts are based on own assumptions.
[This dataset was already contained in the ecoinvent database version 2. It was not individually updated during the transfer to ecoinvent version 3. Life Cycle Impact Assessment results may still have changed, as they are affected by changes in the supply chain, i.e. in other datasets. This dataset was generated following the ecoinvent quality guidelines for version 2. It may have been subject to central changes described in the ecoinvent version 3 change report (http://www.ecoinvent.org/database/ecoinvent-version-3/reports-of-changes/), and the results of the central updates were reviewed extensively. The changes added e.g. consistent water flows and other information throughout the database. The documentation of this dataset can be found in the ecoinvent reports of version 2, which are still available via the ecoinvent website. The change report linked above covers all central changes that were made during the conversion process.]

## Included activities end
This dataset includes mechanical treatment infrastructure, energy consumption, emissions to air, and an estimation of the efforts for transportation.

## Geography
Data from a European study, values used as global average data.

## Technology
Modern Shredder facility with 2 shredder, 2 magnetic separation & 2 Eddy-current separation steps.

## Reference product
- waste electric and electronic equipment: -1 kg; By-product classification Waste; CPC 39990: Other wastes n.e.c.
  EcoSpold01Location=GLO
  production volume 1 kg
    Unknown
    Dummy value to be replaced by value to be calculated from the demand for this treatment activity
  property price 0 EUR2005
    Waste products are assigned a price of zero as they are assumed to require further treatment.
  properties: carbon allocation 0.0882405 kg, carbon content 0.0882405, carbon content, fossil 0.0877555, carbon content, non-fossil 0.000485011, dry mass 1 kg, water content 0, water in wet mass 0 kg, wet mass 1 kg

## Inputs from technosphere
- electricity, medium voltage: 0.066 kWh; lognormal variance with pedigree 0.0513, pedigree (2,3,5,3,1)
  Literature values - based on survey of European companies
  EcoSpold01Location=UCTE
  Uncertainty: literature values - based on survey of European companies
- mechanical treatment facility, waste electric and electronic equipment: 8e-10 unit; lognormal variance with pedigree 0.5761, pedigree (4,5,5,3,5)
  Rough estimation of infrastructure
  EcoSpold01Location=GLO
  Uncertainty: rough estimation of infrastructure

## Emissions to nature
- Aluminium III [air, urban air close to ground]: 1.4e-6 kg; lognormal variance with pedigree 0.1101, pedigree (1,4,5,3,3)
  Values from Swiss Recycling company in Morf (2004)
  Uncertainty: values from Swiss Recycling company in Morf (2004)
- Antimony ion [air, urban air close to ground]: 1.19e-7 kg; lognormal variance with pedigree 0.1101, pedigree (1,4,5,3,3)
  (same comment as for Aluminium III)
- Bromine [air, urban air close to ground]: 2.38e-7 kg; lognormal variance with pedigree 0.1101, pedigree (1,4,5,3,3)
  (same comment as for Aluminium III)
- Cadmium II [air, urban air close to ground]: 2.38e-8 kg; lognormal variance with pedigree 0.1101, pedigree (1,4,5,3,3)
  (same comment as for Aluminium III)
- Chlorine [air, urban air close to ground]: 3.22e-7 kg; lognormal variance with pedigree 0.1101, pedigree (1,4,5,3,3)
  (same comment as for Aluminium III)
- Chromium III [air, urban air close to ground]: 5.18e-8 kg; lognormal variance with pedigree 0.1101, pedigree (1,4,5,3,3)
  (same comment as for Aluminium III)
- Copper ion [air, urban air close to ground]: 4.2e-7 kg; lognormal variance with pedigree 0.1101, pedigree (1,4,5,3,3)
  (same comment as for Aluminium III)
- Iron ion [air, urban air close to ground]: 4.83e-6 kg; lognormal variance with pedigree 0.1101, pedigree (1,4,5,3,3)
  (same comment as for Aluminium III)
- Lead II [air, urban air close to ground]: 4.13e-7 kg; lognormal variance with pedigree 0.1101, pedigree (1,4,5,3,3)
  (same comment as for Aluminium III)
- Mercury II [air, urban air close to ground]: 1.19e-10 kg; lognormal variance with pedigree 0.1101, pedigree (1,4,5,3,3)
  (same comment as for Aluminium III)
- Nickel II [air, urban air close to ground]: 1.61e-7 kg; lognormal variance with pedigree 0.1101, pedigree (1,4,5,3,3)
  (same comment as for Aluminium III)
- Phosphorus [air, urban air close to ground]: 1.4e-8 kg; lognormal variance with pedigree 0.1101, pedigree (1,4,5,3,3)
  (same comment as for Aluminium III)
- Polychlorinated biphenyls [air, urban air close to ground]: 1.89e-9 kg; lognormal variance with pedigree 0.1901, pedigree (1,4,5,3,3)
  (same comment as for Aluminium III)
- Tin ion [air, urban air close to ground]: 3.01e-7 kg; lognormal variance with pedigree 0.1101, pedigree (1,4,5,3,3)
  (same comment as for Aluminium III)
- Zinc II [air, urban air close to ground]: 1.309e-6 kg; lognormal variance with pedigree 0.1101, pedigree (1,4,5,3,3)
  (same comment as for Aluminium III)

## Sampling procedure
own estimation

## Extrapolations
see Geography & Technology

## Review by Jürgen Sutter 2007-08-31
passed.
