# treatment of sewage sludge, 75% water, WWT[U], WW from lorry production, sanitary landfill

Dataset: EcoSpold 2, unit process
Geography: GLO
Time period: 1994-01-01 to 2022-12-31
Technology level: current
Classification: ISIC rev.4 ecoinvent: 3821:Treatment and disposal of non-hazardous waste
Scenario: Business-as-Usual
System model: Allocation at the point of substitution
Generated by: Nikolia Stoikou
Database: ecoinvent
isCopyrightProtected: true

## General comment
The process represents the treatment of a waste (sewage sludge) that is exclusively generated from another waste treatment. Sewage sludge is generated in the wastewater treatment of 'wastewater from lorry production'. Recommended use of this dataset: to be used within the specific chain of treatments for 'wastewater from lorry production'. Share of biogenic carbon in the sludge: 0%. Landfill gas capture and utilisation generates 0.0009379 kWh of electricity and 0.001692 MJ of useful heat. 0 kg waste mass remains in the landfill even after the long term period.

## Included activities start
The activity starts with the waste being available at the gate of the treatment facility. Collection and transportation of the waste to the treatment plant is not included.

## Included activities end
The activity ends with the waste being treated and waste-specific emissions from the landfill are released to the environment (air due to landfil gas and water due to landfil leachate).

## Geography
Landfill site with mean annual temperature (MAT) of 16.743579766537 degC, mean annual precipitation (MAP) of 1250.84108527132 mm/year, and net infiltration of 790.252035689178 mm/year.The leachate percolating through the landfill has an average residence time of 6.33 years.
References: UN data, 2020. Precipitation, Environment Statistics Database, United Nations Statistics Division Available at: http://data.un.org/Data.aspx?q=precipitation&d=ENV&f=variableID%3a6;
World Bank, 2022. Surface area (sq.km), World Bank Group Available at: https://data.worldbank.org/indicator/AG.SRF.TOTL.K2;
Doka G.,2021. A model for composition-specific life cycle inventories of regionalised wastewater fates, Zurich, Switzerland. http://www.doka.ch/publications.htm

## Technology
Sanitary (controlled) landfill for municipal solid waste. Ultimate average landfill height is 20 meters. Operation phase duration is 30 years. The total raw landfill gas mass produced in the landfill from this waste is 0.03116 kg. The total CH4 mass in the raw landfill gas is 0.0012 kg. Percentage of landfill gas directly emitted is 47w%. Percentage of landfill gas captured and flared is 18.02w%. Percentage of landfill gas captured and utilised is 34.98%. Conversion efficiencies are 27.8e% for electricity and 13.5e% for useful heat. Leachate generated during the first 100 years is collected and treated region-specifically before emission. Based on average waste composition and climate data the end of carbonate phase is estimated to be reached 2'863 years after waste deposition.

## Reference product
- heat, district or industrial, other than natural gas: 1 MJ; By-product classification allocatable product; CPC 17300: Steam and hot water; lognormal variance with pedigree 0.55359, pedigree (1,1,1,1,1)
  Net production of heat from landfill gas utilisation.
  Uncertainty: Uncertainty calculated depending on waste input and uncertainty of transfer coefficients in landfill to landfill gas, uncertainty in gas capture and utilisation.
  production volume 0.145653 MJ
    Calculated from the production volume of the reference product in proportion to the respective output amounts.
  property corresponding fuel use, propane, furnace >100kW 0 MJ; name fuel_use
    Lower heating value of the fuel input related to the heat/electricity output, taken directly from ecoinvent v3.0 dataset "heat production, natural gas, at industrial furnace >100kW, GLO 2000".
  property price 0.0106 EUR2005
    Average European district heat price from Ecoheatcool and Euroheat 2005-2006, Ecoheat Work package 1: The European heat market. Final report. 10.6 EUR/GJ i s the price of district heat. http://www.solarthermalworld.org/files/Ecoheatcool%20WP1%20Web.pdf?download
  properties: carbon allocation 0 kg, carbon content 0, carbon content, fossil 0, carbon content, non-fossil 0, dry mass 1 kg, heating value, net 1 MJ, water content 0, water in wet mass 0 kg, wet mass 1 kg

## Inputs from technosphere
- acetic acid, without water, in 98% solution state: 1.13278e-8 kg
- acetylene: 2.03113e-7, 9.64203e-7 kg (2 suppliers, which the file names only by identifier); sum of these 1.16732e-6 kg
- alkyd paint, white, without solvent, in 60% solution state: 1.19457e-6, 5.67077e-6 kg (2 suppliers, which the file names only by identifier); sum of these 6.86534e-6 kg
- aluminium, cast alloy: 7.10935e-5 kg
- aluminium, wrought alloy: 2.50928e-5 kg
- brass: 3.41551e-6, 1.71634e-8 kg (2 suppliers, which the file names only by identifier); sum of these 3.43267e-6 kg
- cast iron: 0.000848685 kg
- copper, cathode: 1.28928e-5 kg
- diesel: 2.86628e-5 kg
- diesel, burned in building machine: 3.44984e-6 MJ
- electricity, medium voltage: 0.0145281 kWh
- electronics, for control units: 2.32662e-5 kg
- flat glass, uncoated: 6.56527e-6, 3.18816e-5 kg (2 suppliers, which the file names only by identifier); sum of these 3.84469e-5 kg
- heat, district or industrial, natural gas: 0.0248629 MJ
- heat, district or industrial, other than natural gas: 0.000147725 MJ
- hydrochloric acid, without water, in 30% solution state: 5.92179e-9, 2.6517e-8 kg (2 suppliers, which the file names only by identifier); sum of these 3.24388e-8 kg
- injection moulding: 0.000118932 kg
- lead: 4.22854e-5 kg
- lime, hydrated, packed: 5.27586e-8, 4.47832e-10 kg (2 suppliers, which the file names only by identifier); sum of these 5.32064e-8 kg
- lubricating oil: 8.80388e-6, 1.85457e-6 kg (2 suppliers, which the file names only by identifier); sum of these 1.06584e-5 kg
- nitric acid, without water, in 50% solution state: 3.65753e-10, 4.75817e-9, 5.43452e-10, 1.35146e-9, 1.75754e-9, 6.4755e-10, 2.22716e-9, 5.87151e-10, 5.4144e-10, 4.12624e-9 kg (10 suppliers, which the file names only by identifier); sum of these 1.69059e-8 kg
- oxygen, liquid: 6.03204e-7, 2.19836e-6 kg (2 suppliers, which the file names only by identifier); sum of these 2.80156e-6 kg
- pig iron: 2.37157e-5, 0.000256047 kg (2 suppliers, which the file names only by identifier); sum of these 0.000279763 kg
- pitch: 1.71266e-9, 9.08858e-9, 2.60484e-7, 1.29748e-8, 1.14623e-6, 4.47994e-9, 2.02761e-7, 7.86067e-8 kg (8 suppliers, which the file names only by identifier); sum of these 1.71634e-6 kg
- polyethylene, high density, granulate: 3.94757e-5 kg
- polypropylene, granulate: 0.000136521 kg
- polyurethane, rigid foam: 1.22923e-5, 2.48904e-5 kg (2 suppliers, which the file names only by identifier); sum of these 3.71827e-5 kg
- powder coat, steel: 3.36951e-5 m2
- propylene glycol, liquid: 2.52764e-6, 1.2483e-6 kg (2 suppliers, which the file names only by identifier); sum of these 3.77594e-6 kg
- refrigeration machine, R134a as refrigerant: 1.5447e-7 unit
- refrigeration machine, carbon dioxide, liquid as refrigerant: 1.71636e-8 unit
- reinforcing steel: 0.000387892 kg
- road vehicle factory: 3.5365e-13 unit
- scrap copper: -1.15248e-7, -2.45639e-6, -5.17214e-6 kg (3 suppliers, which the file names only by identifier); sum of these -7.74377e-6 kg
- scrap lead acid battery: -2.96498e-5 kg
- scrap steel: -1.76658e-6, -0.00433024, -0.00139434 kg (3 suppliers, which the file names only by identifier); sum of these -0.00572635 kg
- section bar rolling, steel: 0.000279763 kg
- sheet rolling, steel: 7.17429e-5 kg
- sodium hydroxide, without water, in 50% solution state: 6.53924e-8 kg
- steel, chromium steel 18/8, hot rolled: 0.000377399 kg
- steel, low-alloyed: 0.0042287 kg
- steel, low-alloyed, hot rolled: 0.00112306 kg
- stone wool, packed: 1.71634e-6 kg
- sulfuric acid: 4.2346e-6, 5.53975e-7 kg (2 suppliers, which the file names only by identifier); sum of these 4.78858e-6 kg
- synthetic rubber: 0.00031622 kg
- tap water: 0.0123333 kg
- used lorry with refrigeration machine, 16 metric ton: -1.71634e-7 unit
- waste aluminium: -5.92851e-5 kg
- waste bulk iron, excluding reinforcement: -0.000401627, -0.000193141, -5.04859e-6 kg (3 suppliers, which the file names only by identifier); sum of these -0.000599816 kg
- waste electric and electronic equipment: -1.81172e-5 kg
- waste glass sheet: -6.29729e-6, -1.60329e-7, -2.42658e-5 kg (3 suppliers, which the file names only by identifier); sum of these -3.07234e-5 kg
- waste polypropylene: -1.75106e-7, -1.36121e-5, -7.93652e-8, -0.00010995, -4.33444e-7, -1.04941e-6, -4.11595e-7, -1.57059e-5 kg (8 suppliers, which the file names only by identifier); sum of these -0.000141417 kg
- waste polyurethane foam: -3.71536e-6, -2.91426e-9 kg (2 suppliers, which the file names only by identifier); sum of these -3.71827e-6 kg
- waste rubber, unspecified: -5.17777e-6, -0.00012334, -0.00012334 kg (3 suppliers, which the file names only by identifier); sum of these -0.000251857 kg
- wastewater from lorry production: -7.78682e-9, -1.61022e-6 m3 (2 suppliers, which the file names only by identifier); sum of these -1.61801e-6 m3
- wastewater, average: -5.89716e-8, -3.49385e-8, -9.81314e-6, -2.34652e-6 m3 (4 suppliers, which the file names only by identifier); sum of these -1.22536e-5 m3
- water, completely softened: 1.43428e-6, 1.99549e-6, 2.6658e-6 kg (3 suppliers, which the file names only by identifier); sum of these 6.09557e-6 kg
- wire drawing, copper: 1.28928e-5 kg
- wire drawing, steel: 0.000281799 kg
- zinc coat, coils: 1.24766e-5 m2

## Inputs from nature
- Water, well, in ground [natural resource, in water]: 1.19285e-5 m3

## Emissions to nature
- Ammonia [air, unspecified]: 3.82743e-9 kg
- Benzene [air, unspecified]: 2.2484e-9 kg
- Cadmium II [air, unspecified]: 2.96926e-13 kg
- Carbon dioxide, fossil [air, non-urban air or from high stacks]: 3.95092e-6 kg
- Carbon dioxide, fossil [air, unspecified]: 0.000108644 kg
- Carbon monoxide, fossil [air, unspecified]: 1.67e-7 kg
- Chromium III [air, unspecified]: 5.02887e-11 kg
- Copper ion [air, unspecified]: 5.02887e-11 kg
- Dinitrogen monoxide [air, unspecified]: 3.82743e-9 kg
- Lead II [air, unspecified]: 3.26104e-15 kg
- Mercury II [air, unspecified]: 5.92136e-16 kg
- Methane, fossil [air, unspecified]: 2.83195e-9 kg
- NMVOC, non-methane volatile organic compounds [air, unspecified]: 1.35076e-6 kg
- Nickel II [air, unspecified]: 2.07677e-12 kg
- Nitrogen oxides [air, unspecified]: 1.0298e-6 kg
- Particulate Matter, < 2.5 um [air, unspecified]: 4.35949e-8 kg
- Particulate Matter, > 10 um [air, unspecified]: 1.87081e-9 kg
- Particulate Matter, > 2.5 um and < 10um [air, unspecified]: 3.63863e-9 kg
- Selenium IV [air, unspecified]: 2.96926e-13 kg
- Sulfur dioxide [air, unspecified]: 2.0596e-8 kg
- Toluene [air, unspecified]: 9.45701e-10 kg
- Water [air, unspecified]: 2.2115e-6 m3
- Xylene [air, unspecified]: 9.45701e-10 kg
- Zinc II [air, unspecified]: 2.96926e-11 kg
- BOD5, Biological Oxygen Demand [water, unspecified]: 2.16258e-8 kg
- COD, Chemical Oxygen Demand [water, unspecified]: 2.16258e-8 kg
- DOC, Dissolved Organic Carbon [water, unspecified]: 9.45701e-9 kg
- TOC, Total Organic Carbon [water, unspecified]: 9.45701e-9 kg
- Water [water, unspecified]: 9.42869e-6 m3
