# natural gas processing plant production

Dataset: EcoSpold 2, unit process
Geography: GLO
Time period: 2000-01-01 to 2022-12-31
Technology level: current
Classification: EcoSpold01Categories: natural gas/production
Classification: ISIC rev.4 ecoinvent: 0620:Extraction of natural gas
Tags: ConvertedDataset
Scenario: Business-as-Usual
System model: Allocation at the point of substitution
Generated by: Mireille Faist Emmenegger (obsolete)
Published in: Faist Emmenegger, M. 2007
Database: ecoinvent
isCopyrightProtected: true

## General comment
Life time is 60 years. Annual production is 1.54 E12 MJ gas per year which is equal to 4.23 E10 Nm3 per year.
[This dataset was already contained in the ecoinvent database version 2. It was not individually updated during the transfer to ecoinvent version 3. Life Cycle Impact Assessment results may still have changed, as they are affected by changes in the supply chain, i.e. in other datasets. This dataset was generated following the ecoinvent quality guidelines for version 2. It may have been subject to central changes described in the ecoinvent version 3 change report (http://www.ecoinvent.org/database/ecoinvent-version-3/reports-of-changes/), and the results of the central updates were reviewed extensively. The changes added e.g. consistent water flows and other information throughout the database. The documentation of this dataset can be found in the ecoinvent reports of version 2, which are still available via the ecoinvent website. The change report linked above covers all central changes that were made during the conversion process.]

## Included activities end
Material, land and energy requirements of a natural gas production plant.

## Geography
Land use is based on Norwegian data, buildings requirements on German data.

## Technology
Data on buildings is based on German data. Land use is based on data for Kollsnes and Karsto, the gas treatment plants in Norway.

## Time period
Data for building requirements stems from 1989 data.

## Reference product
- natural gas processing plant: 1 unit; By-product classification allocatable product; CPC 53262: Power plants
  EcoSpold01Location=GLO
  production volume 1 unit
    Karsto and Kollsnes: 1.3e12 MJ
    Dummy value to be replaced by measured, estimated or calculated value
  property price 3.28107e9 EUR2005
    Calculated based on inputs: The price of the product has been calculated as a sum of the values of the material and energy inputs for this product. This value is therefore a rough estimation. It may underestimate the real price since there are additional expenses when producing any product. These expences can include for example labour costs, treatment of waste materials and profit for the producer. Please consider carefully whether this level of data quality is acceptable for your application.
  properties: carbon allocation 0 kg, carbon content 0

## Inputs from technosphere
- concrete, normal strength: 982000 m3; lognormal variance with pedigree 0.1007, pedigree (3,3,5,3,3)
  Extrapolation from German data
  EcoSpold01Location=CH
  Uncertainty: extrapolation from German data
  properties: dry mass 2190 kg, water content 0.086758, wet mass 2380 kg
- diesel, burned in building machine: 5.07e9 MJ; lognormal variance with pedigree 0.1007, pedigree (3,3,5,3,3)
  Extrapolation from German data
  EcoSpold01Location=GLO
  Uncertainty: extrapolation from German data
  properties: heating value, net 1 MJ
- electricity, medium voltage: 2.82e9 kWh; lognormal variance with pedigree 0.1007, pedigree (3,3,5,3,3)
  EcoSpold01Location=UCTE
  Extrapolation from German data
  Uncertainty: extrapolation from German data
- reinforcing steel: 5.07e9 kg; lognormal variance with pedigree 0.1007, pedigree (3,3,5,3,3)
  EcoSpold01Location=RER
  Extrapolation from German data
  Uncertainty: extrapolation from German data
  properties: carbon content, fossil 0.004, dry mass 1 kg, wet mass 1 kg

## Inputs from nature
- Occupation, industrial area [natural resource, land]: 1.71e8 m2*year; lognormal variance with pedigree 0.0913, pedigree (2,3,5,3,1)
  Personal communication, Statoil
  Uncertainty: personal communication, Statoil
- Transformation, from industrial area [natural resource, land]: 2.86e6 m2; lognormal variance with pedigree 0.1713, pedigree (2,3,5,3,1)
  Personal communication, Statoil
  Uncertainty: personal communication, Statoil
- Transformation, from pasture, man made [natural resource, land]: 2.86e6 m2; lognormal variance with pedigree 0.1713, pedigree (2,3,5,3,1)
  Personal communication, Statoil
  Uncertainty: personal communication, Statoil
- Transformation, to industrial area [natural resource, land]: 2.86e6 m2; lognormal variance with pedigree 0.1713, pedigree (2,3,5,3,1)
  Personal communication, Statoil
  Uncertainty: personal communication, Statoil
- Transformation, to pasture, man made [natural resource, land]: 2.86e6 m2; lognormal variance with pedigree 0.1713, pedigree (2,3,5,3,1)
  Personal communication, Statoil
  Uncertainty: personal communication, Statoil

## Sampling procedure
no information about sampling procedure.

## Extrapolations
Data is extrapolated from Norwegian and German data.

## Review by Michael Spielmann (obsolete) 2003-07-09
Passed.
