# chipper production, stationary, electric

Dataset: EcoSpold 2, unit process
Geography: GLO
Time period: 1996-01-01 to 2022-12-31
Technology level: current
Classification: ISIC rev.4 ecoinvent: 2821:Manufacture of agricultural and forestry machinery
Classification: EcoSpold01Categories: wooden materials/extraction
Synonyms: Häckseler
Tags: Swiss Brushup completed; ConvertedDataset
Scenario: Business-as-Usual
System model: Allocation at the point of substitution
Generated by: Hans-Jörg Althaus
Published in: Werner F. 2007
Database: ecoinvent
isCopyrightProtected: true

## General comment
This dataset represents the production of a stationary electric wood chopper. A stationary chopper is used at sawmills to produce wood chips from industrial residuals.
The estimate of the dataset is very rough and the dataset is thus not more specific than average European production. Due to this uncertainty the dataset must only be used to consider the infrastructure needed for chopping industrial residue wood if the infrastructure is not relevant.
Several types of choppers exist; here only one model is developed and the uncertainty, especially for energy consumption, is rather high.

## Included activities start
From reception of steel and foundation material at chopper construction plant.

## Included activities end
This activity ends with a stationary electric chopper at the construction plant. The dataset includes the production and disposal of construction materials as well as the transport required. The dataset does not include land use as it is already included in the sawmill, material input and the energy consumption of the band conveyors.

## Geography
Estimate is so rough that the Geograhpy is not relevant.

## Technology
Chopper with an hourly output of 3.3 m3/h bulked chips and a life time output of 100'000 m3 (=1.886E7 kg dried matter) bulked chips. The chopper mainly consists of unalloyed steel plates and has a total weight of 2.5 t.
The chopper contains 5 litre of gear lubricant oil, which is exchanged every 4'000 service hours or 13'000 piled m3. This gear lubricant oil is inventoried as “Fuel oil petro, at storehouse CH”. The cutting knifes weight 5 kg, a service life of 2'000 h or 6'500 piled m3 and consist of low-alloyed steel. For the production of the chopper it is assumed that 25 MJ/kg primary energy for unalloyed steel and 35 MJ/kg primary energy for low-alloyed steel must be used. Primary energy resources are 50% electricity and 50% gas.
Reference:
Etienne (1993) Personal communication. Etienne AG, Luzern. (private company)

## Reference product
- chipper, stationary, electric: 1 unit; By-product classification allocatable product; CPC 441: Agricultural or forestry machinery and parts thereof
  Reference product. A stationary wood chopper running on electricity. Several types of choppers exist but this dataset is developed for only one model produced in Switzerland, however by very rough estimates. The stationary chopper is ready for distribution from production plant. Stationary choppers are used in sawmills where wood is transported to the electric choppers by band conveyors.
  production volume 4 unit
    This is a placeholder value that does not reflect real-world production volumes. This dataset does not currently require a real-world production volume to work in the database framework, and no actual data were collected yet. This has no negative effect on the results of the ecoinvent database.
  property price 2679.77 EUR2005
    Calculated based on inputs: The price of the product has been calculated as a sum of the values of the material and energy inputs for this product. This value is therefore a rough estimation. It may underestimate the real price since there are additional expenses when producing any product. These expences can include for example labour costs, treatment of waste materials and profit for the producer. Please consider carefully whether this level of data quality is acceptable for your application.
  properties: carbon allocation 0 kg, carbon content 0

## Inputs from technosphere
- concrete, normal strength: 6 m3; lognormal variance with pedigree 0.39, pedigree (3,5,5,5,3)
  Estimation. Concrete, thickness 0.3 m
  properties: dry mass 2190 kg, water content 0.086758, wet mass 2380 kg
- steel, low-alloyed, hot rolled: 2500 kg; lognormal variance with pedigree 0.0831, pedigree (3,5,5,3,3)
  Estimation
  properties: carbon content, fossil 0.005, dry mass 1 kg, wet mass 1 kg
  note on carbon content, fossil: Low alloyed steel composition given in Tab. 3.2 ecoinvent v2.2 report 10_partII. Steel assumed to have a C content of 0.5%
- waste reinforced concrete: -863.742, -9.152, -12327.1 kg (3 suppliers, which the file names only by identifier); sum of these -13200 kg; lognormal variance with pedigree 0.35, pedigree (3,5,1,5,3)
  Calculated Value
  production volume
    This is a placeholder value that does not reflect real-world production volumes. This dataset does not currently require a real-world production volume to work in the database framework, and no actual data were collected yet. This has no negative effect on the results of the ecoinvent database. Calculated from the production volume of chopper, stationary, electric in proportion to the respective output amounts.
  properties: UVEK_link_1 883, UVEK_relative_amount_1 -1, dry mass 0.99418 kg, water content 0.00585407, wet mass 1 kg
  note on UVEK_link_1: to be used only in special submissions in coordination with ecoinvent and the Swiss FOEN.

## Sampling procedure
Estimation

## Extrapolations
None.This dataset has been copied from an original dataset covering the geography RER. The uncertainty has been adjusted accordingly.

## Review by Roberto Dones 2003-07-04
Passed
