# treatment of used purse seiner, wood

Dataset: EcoSpold 2, unit process
Geography: RLA
Time period: 2010-01-01 to 2022-12-31
Technology level: current
Classification: ISIC rev.4 ecoinvent: 0311:Marine fishing
Scenario: Business-as-Usual
System model: Allocation at the point of substitution
Generated by: Angel Avadí
Published in: Avadí, A. 2018
Database: ecoinvent
isCopyrightProtected: true

## General comment
This dataset represents the end of life of wooden purse seiners, per 1000 kg of light ship weight, based on data from Peru, corresponding to 10 vessels for which data was avilable with different levels of detail. Specific data for specific inventory items may be based on sub-samples for which detailed data was available. Vessel dimensions, landings and fuel use were available for roughly 689 purse seiners
System boundaries and relation between activities

## Included activities start
Treatment of used vessel (recycling)

## Included activities end
End of life (decommissioning). Excludes engines and motors. Excludes energy for dismantling.

## Geography
Data from Peru, extrapolated to Latin America (RLA)

## Technology
Peru features various shipyards and relevant ship-building and ship-retrofitting expertise.

## Reference product
- iron scrap, unsorted: 1 kg; name iron; source Pierre Fréon 2014; By-product classification Recyclable; CPC 39310: Slag, dross, scalings and other waste from the manufacture of iron or steel; triangular min 0.778378, mostLikely 0.891892, max 1.32973, pedigree (4,3,5,1,1)
  Iron and steel recycled from engines and anchors + Recycled steel from keel lining and structural elements
  Uncertainty: Based on assumptions
  production volume 0.0096418 kg
    Calculated from production volume of reference product using the relative outputs.
  property price 0.149 EUR2005
    Temporary price data. Calculated as 90% of purchasers price based on: estimated at 85% of sorted scrap
  properties: carbon allocation 0 kg, carbon content 0, carbon content, fossil 0, carbon content, non-fossil 0, dry mass 1 kg, water content 0, water in wet mass 0 kg, wet mass 1 kg

## Inputs from technosphere
- alkyd paint, white, without solvent, in 60% solution state: 6.32117e-5, 0.000334764 kg (2 suppliers, which the file names only by identifier); sum of these 0.000397975 kg
- bronze: 5.68536e-5 kg
- cast iron: 0.000227414 kg
- copper, cathode: 0.000568536 kg
- epoxy resin insulator, SiO2: 5.68536e-5 kg
- fibre, cotton: 0.000170561 kg
- lead: 0.000909658 kg
- marine electric motor: 1.33606e-7 unit
- marine engine: 1.33606e-6 unit
- metal working, average for steel product manufacturing: 0.0312979 kg
- nylon 6-6: 0.00317572, 0.00137256 kg (2 suppliers, which the file names only by identifier); sum of these 0.00454829 kg
- polyethylene, low density, granulate: 0.000170561 kg
- sawnwood, board, hardwood, dried (u=20%), planed: 8.1746e-8, 0.000360668, 2.15907e-5 m3 (3 suppliers, which the file names only by identifier); sum of these 0.00038234 m3
- steel, low-alloyed: 0.0309852 kg
- used purse seiner, wood: -0.284345 kg
- wire drawing, copper: 0.000568536 kg
- zinc: 8.52804e-5 kg
