# sweet sorghum grain to generic market for energy feed

Dataset: EcoSpold 2, unit process
Geography: GLO
Time period: 2012-01-01 to 2022-12-31
Technology level: current
Classification: ISIC rev.4 ecoinvent: 0111:Growing of cereals (except rice), leguminous crops and oil seeds
Scenario: Business-as-Usual
System model: Allocation at the point of substitution
Generated by: Tereza Levova
Database: ecoinvent
isCopyrightProtected: true

## General comment
This is a linking activity that converts sweet sorghum grain into gross energy for the feed market and protein, 100% crude for the feed market.
The naming of the dataset is based on the feed nomenclature system of the National Research Council (USA). Products with less than 20 percent of protein are classified as energy feeds. Products with more than 20 percent of protein are classified as protein feeds.

## Included activities start
The activity starts with the reception of sweet sorghum grain

## Included activities end
The activity ends with the conversion of sweet sorghum grain into gross energy and crude protein

## Reference product
- protein feed, 100% crude: 1 kg; name protein_feed; = 0.38* sweet_sorghum_grain*(-1)*0.909; source Agroscope 2011; By-product classification allocatable product; CPC 23319: Preparations used in animal feeding n.e.c.; lognormal variance with pedigree 0.0026, pedigree (3,1,1,1,1)
  Calculated based on crude protein content of sweet sorghum grain (0.38kg/kg dry mass). The dry mass of the reference product is 0.909kg/kg.
  production volume 2.05656e10 kg
    Calculated from production volume of reference product using the relative outputs.
  property carbon content, non-fossil 0.53
    considered pure protein (ecoinvent v2.2 report 17, pg 288). C-content in protein is estimated to be 53% ( from "Evolutionary and Biochemical Aspects", A.D. Kay and T. Vrede (in Global Ecology, 2010, Elsevier B.V., S.E. Jørgensen Ed.).
  property price 0.424 EUR2005
    Based on protein content and energy feed, gross content in soybean meal and prices per kg of soybean meal. Assumed soybean meal is the most used feed. Soybean meal 2004 prices for World import/export data (tonnes and US$) from FaoStat statistics (http://faostat.fao.org/site/535/default.aspx#ancor, TRADE)- [Accessed 24 May 2010]. See calculations for protein /energy content
  properties: carbon allocation 0.53 kg, carbon content 0.53, carbon content, fossil 0, dry mass 1 kg, water content 0, water in wet mass 0 kg, wet mass 1 kg

## Inputs from technosphere
- [sulfonyl]urea-compound: 3.39437e-7 kg
- acetamide-anillide-compound, unspecified: 7.90292e-5 kg
- ammonium nitrate: 0.00485836, 0.0070052, 0.00109955, 0.0126765 kg (4 suppliers, which the file names only by identifier); sum of these 0.0256396 kg
- application of plant protection product, by field sprayer: 0.000100431 ha
- atrazine: 0.000183051 kg
- benzoic-compound: 2.81627e-6 kg
- combine harvesting: 0.000224332 ha
- fertilising, by broadcaster: 0.000100431 ha
- glyphosate: 5.49906e-5 kg
- inorganic phosphorus fertiliser, as P2O5: 0.00656495, 0.000952906, 3.72577e-5, 0.00011365, 0.000104586, 8.75833e-7, 3.3087e-6, 4.71004e-5, 0.000111342, 6.01961e-6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 kg (30 suppliers, which the file names only by identifier); sum of these 0.0112166 kg
- irrigation: 0.0142054, 0.000957396, 0.000574328, 1.44033e-5, 0.00256697, 0.0035285, 0.0219672, 0.00848312, 0.145728, 0.000560034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 m3 (17 suppliers, which the file names only by identifier); sum of these 0.512234 m3
- lime: 0.00512101, 0.0621787 kg (2 suppliers, which the file names only by identifier); sum of these 0.0672997 kg
- metolachlor: 8.15673e-5 kg
- organophosphorus-compound, unspecified: 6.5375e-6 kg
- packaging, for fertilisers: 0.215359 kg
- packaging, for pesticides: 0.000850104 kg
- phenoxy-compound: 1.67211e-5 kg
- potassium chloride: 0.0164534, 0.00130137 kg (2 suppliers, which the file names only by identifier); sum of these 0.0177548 kg
- sowing: 0.000224332 ha
- sweet sorghum grain: -0.866997 kg
- tillage, cultivating, chiselling: 0.000224332 ha
- tillage, currying, by weeder: 0.000224332 ha
- tillage, harrowing, by spring tine harrow: 0.000224332 ha
- tillage, ploughing: 0.000224332 ha
- transport, tractor and trailer, agricultural: 0.0167596, 3.73851e-5 metric ton*km (2 suppliers, which the file names only by identifier); sum of these 0.0167969 metric ton*km
- urea: 0.0022495, 0.0143479, 0.0018146, 0.000824977 kg (4 suppliers, which the file names only by identifier); sum of these 0.019237 kg

## Inputs from nature
- Carbon dioxide, in air [natural resource, in air]: 5.73841 kg
- Energy, gross calorific value, in biomass [natural resource, biotic]: 61.4693 MJ
- Occupation, annual crop, irrigated, intensive [natural resource, land]: 1.30853 m2*year
- Transformation, from annual crop [natural resource, land]: 2.24332 m2
- Transformation, to annual crop, irrigated, intensive [natural resource, land]: 2.24332 m2

## Emissions to nature
- Ammonia [air, non-urban air or from high stacks]: 0.00153951 kg
- Dinitrogen monoxide [air, non-urban air or from high stacks]: 0.000466612 kg
- Nitrogen oxides [air, non-urban air or from high stacks]: 9.79884e-5 kg
- Water [air, unspecified]: 0.251456 m3
- 2,4-D [soil, agricultural]: 1.67211e-5 kg
- Alachlor [soil, agricultural]: 6.19561e-5 kg
- Atrazine [soil, agricultural]: 0.000183051 kg
- Cadmium II [soil, agricultural]: -4.10416e-7 kg
- Chlorpyrifos [soil, agricultural]: 1.81039e-6 kg
- Copper ion [soil, agricultural]: -1.85951e-5 kg
- Dicamba [soil, agricultural]: 2.81627e-6 kg
- Dimethenamid [soil, agricultural]: 1.7073e-5 kg
- Glyphosate [soil, agricultural]: 5.49906e-5 kg
- Lead II [soil, agricultural]: -8.96612e-6 kg
- Metolachlor [soil, agricultural]: 8.15673e-5 kg
- Metsulfuron-methyl [soil, agricultural]: 3.7717e-8 kg
- Prosulfuron [soil, agricultural]: 3.01727e-7 kg
- Terbufos [soil, agricultural]: 4.72713e-6 kg
- Zinc II [soil, agricultural]: -2.15312e-5 kg
- Nitrate [water, ground-]: 0.027714 kg
- Phosphorus [water, ground-]: 1.57033e-5 kg
- Phosphorus [water, surface water]: 0.000203391 kg
- Water [water, ground-]: 0.208623 m3
- Water [water, surface water]: 0.0521557 m3

## Sampling procedure
inventory based on gross energy and protein composition of raw material. Data obtained from Agroscope database of feedstuff compositions.

## Review by Bo Weidema 2012-03-14
Production volumes are for 2005, even though the dataset is indicated to be valid for 2012.
