# treatment of waste paperboard, municipal incineration

Dataset: EcoSpold 2, unit process
Geography: CH
Time period: 1994-01-01 to 2022-12-31
Technology level: outdated
Classification: ISIC rev.4 ecoinvent: 3821:Treatment and disposal of non-hazardous waste
Classification: EcoSpold01Categories: waste management/municipal incineration
Tags: Treatment; ConvertedDataset
Scenario: Business-as-Usual
System model: Allocation at the point of substitution
Generated by: Gabor Doka (obsolete)
Published in: Doka G. 2007
Database: ecoinvent
isCopyrightProtected: true

## General comment
Inventoried waste contains 100% cardboard; .
waste composition (wet, in ppm): upper heating value 17.91 MJ/kg; lower heating value 15.92 MJ/kg; H2O 104370; O 392680; H 57791; C 433270; S 1776.8; N 2583.5; P n.a.; B n.a.; Cl 7173.3; Br n.a.; F n.a.; I n.a.; Ag n.a.; As 1.168; Ba 57.193; Cd 0.93313; Co 0.91806; Cr 9.2403; Cu 35.113; Hg 0.30131; Mn 95.196; Mo n.a.; Ni 10.64; Pb 28.963; Sb 0.0046044; Se 3.1073; Sn 6.7521; V n.a.; Zn 63.333; Be 1.1299; Sc n.a.; Sr 45.009; Ti n.a.; Tl n.a.; W n.a.; Si n.a.; Fe n.a.; Ca n.a.; Al n.a.; K n.a.; Mg n.a.; Na n.a.;
Share of carbon in waste that is biogenic 100%.
Share of iron in waste that is metallic/recyclable 0%.
Net energy produced in MSWI: 1.55MJ/kg waste electric energy and 3.23MJ/kg waste thermal energy
Allocation of energy production: no substitution or expansion. Total burden allocated to waste disposal function of MSWI.
One kg of this waste produces 0.006637 kg of slag and 0.00345 kg of residues, which are landfilled. Additional solidification with 0.00138 kg of cement.
[This dataset was already contained in the ecoinvent database version 2. It was not individually updated during the transfer to ecoinvent version 3. Life Cycle Impact Assessment results may still have changed, as they are affected by changes in the supply chain, i.e. in other datasets. This dataset was generated following the ecoinvent quality guidelines for version 2. It may have been subject to central changes described in the ecoinvent version 3 change report (http://www.ecoinvent.org/database/ecoinvent-version-3/reports-of-changes/), and the results of the central updates were reviewed extensively. The changes added e.g. consistent water flows and other information throughout the database. The documentation of this dataset can be found in the ecoinvent reports of version 2, which are still available via the ecoinvent website. The change report linked above covers all central changes that were made during the conversion process.]

## Included activities end
waste-specific air and water emisions from incineration, auxiliary material consumption for flue gas cleaning. Short-term emissions to river water and long-term emisisons to ground water from slag compartment (from bottom slag) and residual material landfill (from solidified fly ashes and scrubber slugde). Process energy demands for MSWI.

## Geography
Specific to the technology mix encountered in Switzerland in 2000. Well applicable to modern incineration practices in Europe, North America or Japan.

## Technology
replaced by newer incineration technology with fly ash extraction. Average Swiss MSWI plants in 2000 with electrostatic precipitator for fly ash (ESP), wet flue gas scrubber and 29.4% SNCR , 32.2% SCR-high dust , 24.6% SCR-low dust -DeNOx facilities and 13.8% without Denox (by burnt waste, according to Swiss average). Share of waste incinerated in plants with magnetic scrap separation from slag : 50%. Gross electric efficiency technology mix 12.997% and Gross thermal efficiency technology mix 25.57%

## Time period
Waste composition as given in literature reference, theoretical data or other source. Transfer coefficients for modern Swiss MSWI. Emission speciation based on early 90ies data.

## Reference product
- waste paperboard: -1 kg; name RP_amount_1; By-product classification Waste; CPC 39240: Waste and scrap of paper or paperboard
  EcoSpold01Location=CH
  production volume 0 kg
    outdated. Replaced by newer incineration technology with fly ash extraction
  property carbon content, non-fossil 0.483259
    C content was calculated for 1 kg DM, using data in Tab A.3, ecoinvent v2.2 report 13_I.
  property heating value, net 15.92 MJ
    Value taken from the general comment of the treatment dataset.
  property price 0 EUR2005
    Waste products are assigned a price of zero as they are assumed to require further treatment.
  properties: carbon allocation 0.38854 kg, carbon content 0.483259, carbon content, fossil 0, dry mass 0.804 kg, water content 0.243781, water in wet mass 0.196 kg, wet mass 1 kg

## Inputs from technosphere
- ammonia, anhydrous, liquid: 0.00013 kg; lognormal variance with pedigree 1.49, pedigree (1,1,5,1,1)
  EcoSpold01Location=CH
  uncertainty calculated from uncertainty in average DeNOx input, uncertainty in the share of thermal NOx, uncertainty of nitrogen content in average municipal waste and the unertainty in nitrogen content in *this* waste.
  properties: dry mass 1 kg, wet mass 1 kg
- cement, unspecified: 0.00138 kg; lognormal variance with pedigree 0.08, pedigree (1,1,5,1,1)
  EcoSpold01Location=CH
  Cement for solidification of landfilled residual material. Uncertainty calculated from unertainty of the waste composition of this waste, of transfer coefficients in the incinerator and of the solidification recipe.
  properties: dry mass 1 kg, wet mass 1 kg
- chemical, inorganic: 2.3e-5 kg; lognormal variance with pedigree 0.4, pedigree (1,1,5,1,1)
  Proxy for Polyelectrolyte. uncertainty calculated from uncertainty in average auxiliary material input, and the unertainty of the waste composition of this waste
  EcoSpold01Location=GLO
  properties: carbon content, fossil 0.003, dry mass 1 kg, wet mass 1 kg
  note on carbon content, fossil: This dataset is an unweighted average of 20 inorganic substances (listed in Tab 88.1, ecoinvent v2.2 report 8, part II), being part of the top100 chemicals included in this database. The C-content has also been calculated as an unweighted average of the C content of the substances composing this dataset.
- chemical, organic: 4.38e-6 kg; lognormal variance with pedigree 1.39, pedigree (1,1,5,1,1)
  EcoSpold01Location=GLO
  Proxy for TMT15. uncertainty calculated from uncertainty in average auxiliary material input, and the unertainty of the waste composition of this waste
  properties: carbon content, fossil 0.628, dry mass 1 kg, heating value, net 19.03 MJ, wet mass 1 kg
  note on carbon content, fossil: This dataset is an unweighted average of 20 organic substances (listed in Tab 88.1, ecoinvent v2.2 report 8, part II), being part of the top100 chemicals included in this database. The C-content has also been calculated as an unweighted average of the C content of the substances composing this dataset.
- chromium oxide, flakes: 7.61e-8 kg; lognormal variance with pedigree 2.2, pedigree (1,1,5,1,1)
  EcoSpold01Location=RER
  Proxy for vanadium pentoxide V2O5 in SCR catalyst, uncertainty calculated from uncertainty in average DeNOx input, uncertainty in the share of thermal NOx, uncertainty of nitrogen content in average municipal waste and the unertainty in nitrogen content in *this* waste.
  properties: dry mass 1 kg, wet mass 1 kg
- heat, district or industrial, natural gas: 0.01143 MJ; lognormal variance with pedigree 1.49, pedigree (1,1,5,1,1)
  EcoSpold01Location=RER
  uncertainty calculated from uncertainty in average DeNOx input, uncertainty in the share of thermal NOx, uncertainty of nitrogen content in average municipal waste and the unertainty in nitrogen content in *this* waste.
  properties: heating value, net 1 MJ
- hydrochloric acid, without water, in 30% solution state: 1.38e-5 kg; lognormal variance with pedigree 0.4, pedigree (1,1,5,1,1)
  uncertainty calculated from uncertainty in average auxiliary material input, and the unertainty of the waste composition of this waste
  EcoSpold01Location=RER
  properties: dry mass 1 kg, heating value, net 3.32 MJ, wet mass 1 kg
- iron (III) chloride, without water, in 40% solution state: 1e-5 kg; lognormal variance with pedigree 0.63, pedigree (1,1,5,1,1)
  EcoSpold01Location=CH
  uncertainty calculated from uncertainty in average auxiliary material input, and the unertainty of the waste composition of this waste
  properties: dry mass 1 kg, wet mass 1 kg
- municipal waste incineration facility: 2.5e-10 unit; lognormal variance with pedigree 0.04, pedigree (1,1,5,1,1)
  EcoSpold01Location=CH
  demands per kilogram waste. uncertainty is heeded in the module
- process-specific burdens, municipal waste incineration: 1 kg; lognormal variance with pedigree 0.04, pedigree (1,1,5,1,1)
  demands per kilogram waste. uncertainty is heeded in the module;activityLink introduced to establish a direct link to the corresponding regional supply of this product
  EcoSpold01Location=CH
- process-specific burdens, residual material landfill: 0.00345 kg; lognormal variance with pedigree 0.07, pedigree (1,1,5,1,1)
  uncertainty is calculated from uncertainties in waste composition and transfer coefficients in incinerator;activityLink introduced to establish a direct link to the corresponding regional supply of this product
  EcoSpold01Location=CH
- process-specific burdens, slag landfill: 0.00664 kg; lognormal variance with pedigree 0.08, pedigree (1,1,5,1,1)
  (same comment as for process-specific burdens, residual material landfill)
- quicklime, milled, packed: 0.00124 kg; lognormal variance with pedigree 0.45, pedigree (1,1,5,1,1)
  (same comment as for iron (III) chloride, without water, in 40% solution state)
  properties: dry mass 0.99 kg, water content 0.010101, wet mass 1 kg
- residual material landfill: 7.19e-12 unit; lognormal variance with pedigree 0.07, pedigree (1,1,5,1,1)
  EcoSpold01Location=CH
  uncertainty is calculated from uncertainties in waste composition and transfer coefficients in incinerator
- slag landfill: 1.18e-11 unit; lognormal variance with pedigree 0.08, pedigree (1,1,5,1,1)
  uncertainty is calculated from uncertainties in waste composition and transfer coefficients in incinerator
  EcoSpold01Location=CH
- sodium hydroxide, without water, in 50% solution state: 0.00764 kg; lognormal variance with pedigree 0.4, pedigree (1,1,5,1,1)
  EcoSpold01Location=RER
  uncertainty calculated from uncertainty in average auxiliary material input, and the unertainty of the waste composition of this waste
  properties: dry mass 1 kg, heating value, net 3.03 MJ, wet mass 1 kg
- titanium dioxide: 3.73e-6 kg; lognormal variance with pedigree 2.2, pedigree (1,1,5,1,1)
  (same comment as for heat, district or industrial, natural gas)
  properties: dry mass 1 kg, wet mass 1 kg
- waste cement, hydrated: -0.00345 kg; name BP_amount_1; lognormal variance with pedigree 0.04, pedigree (1,1,1,1,1)
  EcoSpold01Location=CH
  Hydrated cement for solidification of landfilled residual material. Uncertainty calculated from unertainty of the waste composition of this waste and transfer coefficients in the incinerator and of the solidification recipe.
  production volume
    Calculated from the production volume of waste packaging cardboard, 19.6% water in proportion to the respective output amounts.
  properties: dry mass 1 kg, wet mass 1 kg

## Emissions to nature
- Ammonia [air, urban air close to ground]: 2.05e-6 kg; lognormal variance with pedigree 1.6, pedigree (1,1,5,1,1)
  uncertainty calculated from uncertainty in average N-emissions, uncertainty in the share of thermal NOx, uncertainty of nitrogen content in average municipal waste and the unertainty in nitrogen content in *this* waste.
- Antimony ion [air, urban air close to ground]: 1.79e-17 kg; lognormal variance with pedigree 2.09, pedigree (1,1,5,1,1)
  uncertainty is calculated from uncertainties in waste composition and transfer coefficients in incinerator
- Arsenic ion [air, urban air close to ground]: 1.19e-14 kg; lognormal variance with pedigree 1.7, pedigree (1,1,5,1,1)
  (same comment as for Antimony ion)
- Barium II [air, urban air close to ground]: 5.72e-8 kg; lognormal variance with pedigree 1.09, pedigree (1,1,5,1,1)
  (same comment as for Antimony ion)
- Beryllium II [air, urban air close to ground]: 1.13e-9 kg; lognormal variance with pedigree 1.61, pedigree (1,1,5,1,1)
  (same comment as for Antimony ion)
- Cadmium II [air, urban air close to ground]: 5.14e-11 kg; lognormal variance with pedigree 1.65, pedigree (1,1,5,1,1)
  (same comment as for Antimony ion)
- Carbon dioxide, non-fossil [air, urban air close to ground]: 1.57 kg; lognormal variance with pedigree 0.06, pedigree (1,1,5,1,1)
  (same comment as for Antimony ion)
- Carbon monoxide, non-fossil [air, urban air close to ground]: 0.000223 kg; lognormal variance with pedigree 0.690625, pedigree (1,3,5,2,1)
  Literature data from switzerland and germany adapted to plant age distribution in switzerland
  Uncertainty: & basic uncertainty of 5; literature data from switzerland and germany adapted to plant age distribution in switzerland
- Chromium III [air, urban air close to ground]: 6.83e-13 kg; lognormal variance with pedigree 1.41, pedigree (1,1,5,1,1)
  (same comment as for Antimony ion)
- Cobalt II [air, urban air close to ground]: 2.91e-14 kg; lognormal variance with pedigree 1.72, pedigree (1,1,5,1,1)
  (same comment as for Antimony ion)
- Copper ion [air, urban air close to ground]: 2.59e-10 kg; lognormal variance with pedigree 1.2, pedigree (1,1,5,1,1)
  (same comment as for Antimony ion)
- Cyanide [air, urban air close to ground]: 2.33e-6 kg; lognormal variance with pedigree 1.6, pedigree (1,1,5,1,1)
  (same comment as for Ammonia)
- Dinitrogen monoxide [air, urban air close to ground]: 1.09e-5 kg; lognormal variance with pedigree 1.6, pedigree (1,1,5,1,1)
  (same comment as for Ammonia)
- Hydrochloric acid [air, urban air close to ground]: 7.96e-8 kg; lognormal variance with pedigree 0.5, pedigree (1,1,5,1,1)
  (same comment as for Antimony ion)
- Lead II [air, urban air close to ground]: 1.08e-9 kg; lognormal variance with pedigree 1.21, pedigree (1,1,5,1,1)
  (same comment as for Antimony ion)
- Manganese II [air, urban air close to ground]: 5.18e-13 kg; lognormal variance with pedigree 1.13, pedigree (1,1,5,1,1)
  (same comment as for Antimony ion)
- Mercury II [air, urban air close to ground]: 1.04e-14 kg; lognormal variance with pedigree 1.86, pedigree (1,1,5,1,1)
  (same comment as for Antimony ion)
- Methane, non-fossil [air, urban air close to ground]: 6.38e-6 kg; lognormal variance with pedigree 0.091225, pedigree (2,3,5,2,1)
  Confidential data from 5 plants in Switzerland and Germany
  Uncertainty: & basic uncertainty of 1.5; confidential data from 5 plants in Switzerland and Germany
- Nickel II [air, urban air close to ground]: 4.59e-13 kg; lognormal variance with pedigree 1.4, pedigree (1,1,5,1,1)
  (same comment as for Antimony ion)
- Nitrogen oxides [air, urban air close to ground]: 8.22e-5 kg; lognormal variance with pedigree 1.6, pedigree (1,1,5,1,1)
  (same comment as for Ammonia)
- Selenium IV [air, urban air close to ground]: 1.56e-14 kg; lognormal variance with pedigree 1.58, pedigree (1,1,5,1,1)
  (same comment as for Antimony ion)
- Strontium [air, urban air close to ground]: 4.5e-9 kg; lognormal variance with pedigree 1.14, pedigree (1,1,5,1,1)
  (same comment as for Antimony ion)
- Sulfur dioxide [air, urban air close to ground]: 7.57e-6 kg; lognormal variance with pedigree 0.64, pedigree (1,1,5,1,1)
  (same comment as for Antimony ion)
- Tin ion [air, urban air close to ground]: 8.96e-9 kg; lognormal variance with pedigree 1.38, pedigree (1,1,5,1,1)
  (same comment as for Antimony ion)
- Zinc II [air, urban air close to ground]: 1.03e-9 kg; lognormal variance with pedigree 1.11, pedigree (1,1,5,1,1)
  (same comment as for Antimony ion)
- Antimony ion [water, ground-, long-term]: 2.94e-9 kg; lognormal variance with pedigree 1.68, pedigree (1,1,5,1,1)
  Long-term emissions from landfilling of incineration residues. uncertainty is calculated from uncertainties in waste composition and transfer coefficients in incinerator and landfills.
- Antimony ion [water, surface water]: 1.6e-9 kg; lognormal variance with pedigree 1.71, pedigree (1,1,5,1,1)
  uncertainty is calculated from uncertainties in waste composition and transfer coefficients in incinerator and landfills
- Arsenic ion [water, ground-, long-term]: 6.41e-7 kg; lognormal variance with pedigree 1.59, pedigree (1,1,5,1,1)
  (same comment as for Antimony ion)
- Arsenic ion [water, surface water]: 5.27e-7 kg; lognormal variance with pedigree 1.34, pedigree (1,1,5,1,1)
  (same comment as for Antimony ion)
- BOD5, Biological Oxygen Demand [water, ground-, long-term]: 0.0035 kg; lognormal variance with pedigree 0.06, pedigree (1,1,5,1,1)
  (same comment as for Antimony ion)
- BOD5, Biological Oxygen Demand [water, surface water]: 1.62e-5 kg; lognormal variance with pedigree 0.17, pedigree (1,1,5,1,1)
  (same comment as for Antimony ion)
- Barium II [water, ground-, long-term]: 5.08e-5 kg; lognormal variance with pedigree 1.12, pedigree (1,1,5,1,1)
  (same comment as for Antimony ion)
- Barium II [water, surface water]: 7.86e-9 kg; lognormal variance with pedigree 1.95, pedigree (1,1,5,1,1)
  (same comment as for Antimony ion)
- Beryllium II [water, ground-, long-term]: 9.1e-7 kg; lognormal variance with pedigree 1.38, pedigree (1,1,5,1,1)
  (same comment as for Antimony ion)
- Beryllium II [water, surface water]: 7.02e-10 kg; lognormal variance with pedigree 1.84, pedigree (1,1,5,1,1)
  (same comment as for Antimony ion)
- COD, Chemical Oxygen Demand [water, ground-, long-term]: 0.0107 kg; lognormal variance with pedigree 0.06, pedigree (1,1,5,1,1)
  (same comment as for Antimony ion)
- COD, Chemical Oxygen Demand [water, surface water]: 2.9e-5 kg; lognormal variance with pedigree 0.29, pedigree (1,1,5,1,1)
  (same comment as for Antimony ion)
- Cadmium II [water, ground-, long-term]: 9.36e-9 kg; lognormal variance with pedigree 7.34, pedigree (1,1,5,1,1)
  (same comment as for Antimony ion)
- Cadmium II [water, surface water]: 4.23e-10 kg; lognormal variance with pedigree 1.58, pedigree (1,1,5,1,1)
  (same comment as for Antimony ion)
- Chloride [water, ground-, long-term]: 0.000169 kg; lognormal variance with pedigree 0.22, pedigree (1,1,5,1,1)
  (same comment as for Antimony ion)
- Chloride [water, surface water]: 0.007 kg; lognormal variance with pedigree 0.4, pedigree (1,1,5,1,1)
  (same comment as for Antimony ion)
- Chromium III [water, surface water]: 2.94e-8 kg; lognormal variance with pedigree 1.33, pedigree (1,1,5,1,1)
  (same comment as for Antimony ion)
- Chromium VI [water, ground-, long-term]: 9.78e-7 kg; lognormal variance with pedigree 1.53, pedigree (1,1,5,1,1)
  (same comment as for Antimony ion)
- Chromium VI [water, surface water]: 3.01e-7 kg; lognormal variance with pedigree 1.24, pedigree (1,1,5,1,1)
  (same comment as for Antimony ion)
- Cobalt II [water, ground-, long-term]: 8.04e-7 kg; lognormal variance with pedigree 1.56, pedigree (1,1,5,1,1)
  (same comment as for Antimony ion)
- Cobalt II [water, surface water]: 1.57e-10 kg; lognormal variance with pedigree 2.05, pedigree (1,1,5,1,1)
  (same comment as for Antimony ion)
- Copper ion [water, ground-, long-term]: 2.84e-5 kg; lognormal variance with pedigree 1.11, pedigree (1,1,5,1,1)
  (same comment as for Antimony ion)
- Copper ion [water, surface water]: 1.43e-9 kg; lognormal variance with pedigree 1.75, pedigree (1,1,5,1,1)
  (same comment as for Antimony ion)
- DOC, Dissolved Organic Carbon [water, ground-, long-term]: 0.00423 kg; lognormal variance with pedigree 0.06, pedigree (1,1,5,1,1)
  (same comment as for Antimony ion)
- DOC, Dissolved Organic Carbon [water, surface water]: 1.19e-5 kg; lognormal variance with pedigree 0.28, pedigree (1,1,5,1,1)
  (same comment as for Antimony ion)
- Lead II [water, ground-, long-term]: 2.06e-6 kg; lognormal variance with pedigree 7.21, pedigree (1,1,5,1,1)
  (same comment as for Antimony ion)
- Lead II [water, surface water]: 8.07e-10 kg; lognormal variance with pedigree 1.18, pedigree (1,1,5,1,1)
  (same comment as for Antimony ion)
- Manganese II [water, ground-, long-term]: 8.2e-5 kg; lognormal variance with pedigree 1.1, pedigree (1,1,5,1,1)
  (same comment as for Antimony ion)
- Manganese II [water, surface water]: 5.33e-9 kg; lognormal variance with pedigree 1.77, pedigree (1,1,5,1,1)
  (same comment as for Antimony ion)
- Mercury II [water, ground-, long-term]: 1.57e-8 kg; lognormal variance with pedigree 3.51, pedigree (1,1,5,1,1)
  (same comment as for Antimony ion)
- Mercury II [water, surface water]: 3.22e-9 kg; lognormal variance with pedigree 1.73, pedigree (1,1,5,1,1)
  (same comment as for Antimony ion)
- Nickel II [water, ground-, long-term]: 9.96e-6 kg; lognormal variance with pedigree 1.25, pedigree (1,1,5,1,1)
  (same comment as for Antimony ion)
- Nickel II [water, surface water]: 6.67e-9 kg; lognormal variance with pedigree 1.87, pedigree (1,1,5,1,1)
  (same comment as for Antimony ion)
- Nitrate [water, ground-, long-term]: 9.28e-5 kg; lognormal variance with pedigree 0.59, pedigree (1,1,5,1,1)
  (same comment as for Antimony ion)
- Nitrate [water, surface water]: 3.3e-5 kg; lognormal variance with pedigree 0.41, pedigree (1,1,5,1,1)
  (same comment as for Antimony ion)
- Selenium IV [water, ground-, long-term]: 2.09e-6 kg; lognormal variance with pedigree 0.99, pedigree (1,1,5,1,1)
  (same comment as for Antimony ion)
- Selenium IV [water, surface water]: 1.01e-6 kg; lognormal variance with pedigree 1.16, pedigree (1,1,5,1,1)
  (same comment as for Antimony ion)
- Strontium [water, ground-, long-term]: 4.49e-5 kg; lognormal variance with pedigree 1.11, pedigree (1,1,5,1,1)
  (same comment as for Antimony ion)
- Strontium [water, surface water]: 2.83e-8 kg; lognormal variance with pedigree 1.82, pedigree (1,1,5,1,1)
  (same comment as for Antimony ion)
- Sulfate [water, ground-, long-term]: 0.00446 kg; lognormal variance with pedigree 0.36, pedigree (1,1,5,1,1)
  (same comment as for Antimony ion)
- Sulfate [water, surface water]: 0.000863 kg; lognormal variance with pedigree 0.31, pedigree (1,1,5,1,1)
  (same comment as for Antimony ion)
- TOC, Total Organic Carbon [water, ground-, long-term]: 0.00423 kg; lognormal variance with pedigree 0.06, pedigree (1,1,5,1,1)
  (same comment as for Antimony ion)
- TOC, Total Organic Carbon [water, surface water]: 1.19e-5 kg; lognormal variance with pedigree 0.28, pedigree (1,1,5,1,1)
  (same comment as for Antimony ion)
- Tin ion [water, ground-, long-term]: 3.39e-6 kg; lognormal variance with pedigree 1.7, pedigree (1,1,5,1,1)
  (same comment as for Antimony ion)
- Tin ion [water, surface water]: 2.51e-10 kg; lognormal variance with pedigree 1.43, pedigree (1,1,5,1,1)
  (same comment as for Antimony ion)
- Zinc II [water, ground-, long-term]: 9.82e-7 kg; lognormal variance with pedigree 5.65, pedigree (1,1,5,1,1)
  (same comment as for Antimony ion)
- Zinc II [water, surface water]: 1.16e-8 kg; lognormal variance with pedigree 0.94, pedigree (1,1,5,1,1)
  (same comment as for Antimony ion)

## Sampling procedure
waste-specific calculation based on literature data

## Extrapolations
Typical elemental transfer coefficients from current studies for modern MSWI, completed with data from coal power plants and estimates, adapted for inert/burnable waste.

## Review by Niels Jungbluth 2003-07-15
Passed. Calculation for standard deviation 95 of, i.e., infrastructure,
land occupation, transport services or other services can differ from
standard Pedigree approach used in this project and figures obtained by
this procedure.
