# treatment of refinery sludge, hazardous waste incineration, with energy recovery

Dataset: EcoSpold 2, unit process
Geography: CH
Time period: 1997-01-01 to 2022-12-31
Technology level: current
Classification: ISIC rev.4 ecoinvent: 3822:Treatment and disposal of hazardous waste
Tags: Treatment; ConvertedDataset
Scenario: Business-as-Usual
System model: Allocation at the point of substitution
Share of production covered: 39 %
Generated by: Gabor Doka (obsolete)
Published in: Doka G. 2008
Database: ecoinvent
isCopyrightProtected: true

## General comment
Inventoried waste contains 100% refinery sludge; . waste composition (wet, in ppm): upper heating value 4.732 MJ/kg; lower heating value 2.453 MJ/kg; H2O 888000; O 1017.1; H 13731; C 86452; S 508.54; N 1017.1; P 478.03; B n.a.; Cl n.a.; Br n.a.; F n.a.; I n.a.; Ag n.a.; As n.a.; Ba n.a.; Cd 10.171; Co 20.342; Cr n.a.; Cu 101.71; Hg 2.0342; Mn n.a.; Mo n.a.; Ni 152.56; Pb 457.69; Sb n.a.; Se n.a.; Sn n.a.; V n.a.; Zn 1017.1; Be n.a.; Sc n.a.; Sr n.a.; Ti n.a.; Tl n.a.; W n.a.; Si n.a.; Fe n.a.; Ca 7000; Al n.a.; K n.a.; Mg n.a.; Na n.a.; Share of carbon in waste that is biogenic 0%. Net energy produced in HWI: 17.11MJ/kg thermal energy and 1.27MJ/kg electric energy. Allocation of energy production: no substitution or expansion. 100% of burden allocated to waste disposal function of HWI. One kg of this waste produces 0.01394 kg of residues, which are landfilled. Additional solidification with 0.005575 kg of cement.
[This dataset is meant to replace the following datasets:]

## Included activities end
waste-specific air and water emissions from incineration, auxiliary material consumption for flue gas cleaning. Short-term emissions to river water and long-term emissions to ground water from residual material landfill (from solidified fly ashes and scrubber slugde). Process energy demands for HWI.

## Geography
Specific to the technology encountered in Switzerland in 2000. Well applicable to modern incineration practices in Europe or North America or Japan.

## Technology
Swiss HWI plant in 2000 with wet flue gas scrubber and low-dust SCR DeNOx facility. Gross thermal efficiency 74.4% and gross electric efficiency 10%.

## Time period
Transfer coefficients for modern Swiss MSWI. Emission speciation based on early 90ies data.

## Parameters
- fraction, process water, to air: 1 dimensionless; name fraction_PW_to_air; lognormal variance with pedigree 0.092025, pedigree (4,4,3,2,4)
  Calculated value. During incineration all water incorporated in the products entering the incinerator evaporate to air.

## Reference product
- heat, district or industrial, other than natural gas: 1 MJ; name BP2; By-product classification allocatable product; CPC 17300: Steam and hot water; lognormal variance with pedigree 0.120025, pedigree (1,1,1,2,1)
  production volume 9.0683e8 MJ
    Calculated based on the production volume of the reference product.
  property corresponding fuel use, propane, furnace >100kW 0 MJ; name fuel_use
    Lower heating value of the fuel input related to the heat/electricity output, taken directly from ecoinvent v3.0 dataset "heat production, natural gas, at industrial furnace >100kW, GLO 2000".
  property price 0.0106 EUR2005
    Average European district heat price from Ecoheatcool and Euroheat 2005-2006, Ecoheat Work package 1: The European heat market. Final report. 10.6 EUR/GJ i s the price of district heat. http://www.solarthermalworld.org/files/Ecoheatcool%20WP1%20Web.pdf?download
  properties: carbon allocation 0 kg, carbon content 0, heating value, net 1 MJ

## Inputs from technosphere
- N-methyl-2-pyrrolidone: 2.19857e-7 kg
- acetic acid, without water, in 98% solution state: 3.39436e-9 kg
- acrylic acid: 1.36173e-10, 6.46431e-10 kg (2 suppliers, which the file names only by identifier); sum of these 7.82604e-10 kg
- aluminium oxide, non-metallurgical: 1.34349e-6 kg
- ammonia, anhydrous, liquid: 1.12682e-7, 1.21465e-8, 2.53716e-7, 1.18287e-7, 4.46405e-7, 5.80473e-8, 5.42992e-8, 1.28456e-6, 3.73116e-8 kg (9 suppliers, which the file names only by identifier); sum of these 2.37746e-6 kg
- ammonium nitrate: 1.10993e-7, 1.60039e-7, 8.53102e-8, 2.89604e-7 kg (4 suppliers, which the file names only by identifier); sum of these 6.45947e-7 kg
- bentonite: 6.64238e-9 kg
- benzaldehyde: 3.56485e-8, 1.76053e-8 kg (2 suppliers, which the file names only by identifier); sum of these 5.32538e-8 kg
- blast furnace sludge: -6.90448e-7, -4.03838e-7, -4.54617e-6, -1.02595e-7 kg (4 suppliers, which the file names only by identifier); sum of these -5.74305e-6 kg
- calcium chloride: 3.51356e-8 kg
- carbon dioxide, liquid: 3.69216e-6, 7.77211e-7 kg (2 suppliers, which the file names only by identifier); sum of these 4.46937e-6 kg
- carbon disulfide: 3.503e-8 kg
- charcoal: 7.05753e-10 kg
- chemical factory, organics: 6.47485e-16, 3.55235e-15 unit (2 suppliers, which the file names only by identifier); sum of these 4.19983e-15 unit
- chemical, inorganic: 6.91914e-10 kg
- chemical, organic: 1.07279e-6 kg
- chlorine, gaseous: 4.66019e-8, 9.46167e-9 kg (2 suppliers, which the file names only by identifier); sum of these 5.60635e-8 kg
- chlorine, liquid: 5.25504e-8, 5.06897e-8 kg (2 suppliers, which the file names only by identifier); sum of these 1.0324e-7 kg
- chlorodifluoromethane: 2.93068e-6 kg
- cobalt: 2.79893e-8 kg
- compressed air, 800 kPa gauge: 1.19e-5, 4.84235e-6 m3 (2 suppliers, which the file names only by identifier); sum of these 1.67424e-5 m3
- copper cake: -4.19433e-6 kg
- diesel: 3.48752e-6 kg
- diesel, burned in building machine: 7.79833e-5 MJ
- diesel, burned in diesel-electric generating set, 10MW: 1.3702e-5 MJ
- electricity, medium voltage: 8.56385e-9, 2.41025e-8, 2.30401e-9, 6.41846e-10, 7.83107e-9, 8.41889e-7, 1.08738e-9, 4.13968e-8, 2.62697e-7, 5.18997e-8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 kWh (46 suppliers, which the file names only by identifier); sum of these 3.9684e-5 kWh
- electricity, medium voltage, cobalt industry: 0.00272838 kWh
- ethanol, without water, in 99.7% solution state, from ethylene: 6.55955e-9, 1.46061e-8 kg (2 suppliers, which the file names only by identifier); sum of these 2.11657e-8 kg
- ethylene glycol: 3.29996e-10 kg
- explosive, tovex: 1.50502e-7 kg
- fibre, viscose: 8.79427e-7 kg
- hard coal: 8.41362e-8, 1.11639e-7, 5.0621e-8, 3.12663e-8, 3.58257e-7, 5.16575e-8, 3.94129e-8, 7.547e-8, 2.19679e-8, 1.2012e-8 kg (10 suppliers, which the file names only by identifier); sum of these 8.36439e-7 kg
- hazardous waste, for incineration: -7.82753e-6, -9.83947e-8 kg (2 suppliers, which the file names only by identifier); sum of these -7.92592e-6 kg
- hazardous waste, for underground deposit: -2.73466e-6 kg
- heat, district or industrial, natural gas: 7.68889e-6, 0.000682368, 1.65958e-5, 2.72712e-7, 5.12862e-9 MJ (5 suppliers, which the file names only by identifier); sum of these 0.000706931 MJ
- heat, district or industrial, other than natural gas: 0.0034174, 0.000317057 MJ (2 suppliers, which the file names only by identifier); sum of these 0.00373446 MJ
- heavy fuel oil: 4.3396e-6, 3.65158e-8, 1.85639e-7, 2.4071e-7, 4.68444e-8, 6.27082e-8, 8.94054e-7 kg (7 suppliers, which the file names only by identifier); sum of these 5.80607e-6 kg
- heavy fuel oil, burned in refinery furnace: 0.000789925 MJ
- hydrochloric acid, without water, in 30% solution state: 3.85298e-7, 5.28072e-6 kg (2 suppliers, which the file names only by identifier); sum of these 5.66602e-6 kg
- hydrogen fluoride: 4.98521e-6 kg
- hydrogen peroxide, without water, in 50% solution state: 6.11715e-8, 1.2886e-8 kg (2 suppliers, which the file names only by identifier); sum of these 7.40576e-8 kg
- hydrogen sulfide: 1.25116e-6, 2.63562e-7 kg (2 suppliers, which the file names only by identifier); sum of these 1.51472e-6 kg
- hydrogen, liquid: 5.3392e-8, 2.44335e-7 kg (2 suppliers, which the file names only by identifier); sum of these 2.97727e-7 kg
- inert waste: -0.000184293, -1.58726e-6, -0.000649608 kg (3 suppliers, which the file names only by identifier); sum of these -0.000835488 kg
- iron sulfate: 9.73441e-10, 1.08924e-7 kg (2 suppliers, which the file names only by identifier); sum of these 1.09897e-7 kg
- isobutanol: 1.33662e-9, 3.22101e-9 kg (2 suppliers, which the file names only by identifier); sum of these 4.55763e-9 kg
- kaolin: 2.79893e-7 kg
- kerosene: 1.61989e-10, 2.74007e-8, 9.70637e-10, 5.60762e-9, 3.0794e-9, 2.05681e-10, 3.98616e-10, 2.63833e-10 kg (8 suppliers, which the file names only by identifier); sum of these 3.80885e-8 kg
- lanthanum oxide: 2.79893e-8 kg
- leach residue from copper production: -1.50235e-5 kg
- light fuel oil: 1.00349e-7, 9.96047e-9, 9.57713e-10, 2.15446e-8, 7.11739e-10, 6.60965e-10, 4.93523e-9 kg (7 suppliers, which the file names only by identifier); sum of these 1.3912e-7 kg
- lime, hydrated, loose weight: 7.05648e-9, 8.31304e-7 kg (2 suppliers, which the file names only by identifier); sum of these 8.3836e-7 kg
- lime, hydrated, packed: 2.78596e-5, 7.59103e-8 kg (2 suppliers, which the file names only by identifier); sum of these 2.79355e-5 kg
- limestone, crushed, for mill: 9.86799e-7, 3.95646e-9, 8.44788e-9 kg (3 suppliers, which the file names only by identifier); sum of these 9.99203e-7 kg
- limestone, crushed, washed: 2.24181e-5, 1.9115e-7 kg (2 suppliers, which the file names only by identifier); sum of these 2.26093e-5 kg
- lubricating oil: 1.43361e-8, 5.68078e-8 kg (2 suppliers, which the file names only by identifier); sum of these 7.1144e-8 kg
- magnesium oxide: 7.58132e-7 kg
- manganese sulfate: 3.58003e-9 kg
- methanol: 1.41024e-5 kg
- methyl ethyl ketone: 7.65981e-7 kg
- methyl tert-butyl ether: 1.05009e-5 kg
- molybdenum: 5.99535e-11 kg
- molybdenum trioxide: 2.79893e-8 kg
- municipal solid waste: -1.97969e-9 kg
- naphtha: 7.75177e-8, 3.65433e-6, 5.92691e-7, 1.60759e-7, 6.18923e-9, 2.55425e-8, 8.15823e-7 kg (7 suppliers, which the file names only by identifier); sum of these 5.33285e-6 kg
- natural gas, high pressure: 1.13819e-8, 7.01427e-8, 4.01726e-7, 1.19217e-7, 6.74421e-6, 6.89312e-7, 7.5244e-8, 2.22034e-9, 2.6718e-7, 2.80571e-7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 m3 (25 suppliers, which the file names only by identifier); sum of these 1.99511e-5 m3
- natural gas, low pressure: 5.37958e-7, 1.93182e-7, 1.61432e-7, 4.19008e-7, 3.96649e-7, 8.24228e-6, 4.05593e-7, 3.52378e-7, 7.78094e-8, 3.78583e-6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 m3 (14 suppliers, which the file names only by identifier); sum of these 1.52626e-5 m3
- nickel smelter slag: -0.000101767 kg
- nickel, class 1: 2.79974e-8 kg
- nitric acid, without water, in 50% solution state: 1.81761e-10, 2.36457e-9, 2.70068e-10, 6.71609e-10, 8.73407e-10, 3.218e-10, 1.10678e-9, 2.91784e-10, 2.69068e-10, 2.05053e-9 kg (10 suppliers, which the file names only by identifier); sum of these 8.40138e-9 kg
- nitrogen, liquid: 6.55852e-7, 1.99793e-6 kg (2 suppliers, which the file names only by identifier); sum of these 2.65378e-6 kg
- non-sulfidic overburden, off-site: -0.000623831 kg
- oxygen, liquid: 3.38169e-7, 1.23245e-6 kg (2 suppliers, which the file names only by identifier); sum of these 1.57061e-6 kg
- palladium: 2.50489e-11 kg
- paraffin: 4.31837e-11 kg
- petroleum: 0.00882339, 0.00219104, 0.0191048 kg (3 suppliers, which the file names only by identifier); sum of these 0.0301192 kg
- petroleum coke: 2.42099e-6 kg
- petroleum refinery: 7.22232e-14, 1.52446e-13 unit (2 suppliers, which the file names only by identifier); sum of these 2.2467e-13 unit
- phosphoric acid, industrial grade, without water, in 85% solution state: 2.23166e-9 kg
- platinum: 4.20633e-10 kg
- polyacrylamide: 2.55048e-8 kg
- potassium hydroxide: 3.03994e-8 kg
- process-specific burdens, inert material landfill: 3.48047e-6, 2.95434e-8 kg (2 suppliers, which the file names only by identifier); sum of these 3.51001e-6 kg
- propane: 4.29667e-6 kg
- propylene glycol, liquid: 5.7117e-8 kg
- quicklime, milled, loose: 2.74811e-8, 3.28835e-6 kg (2 suppliers, which the file names only by identifier); sum of these 3.31583e-6 kg
- quicklime, milled, packed: 6.22947e-6 kg
- refinery sludge: -7.75974e-8, -2.47435e-5, -3.82352e-7 kg (3 suppliers, which the file names only by identifier); sum of these -2.52034e-5 kg
- rhodium: 7.9305e-13 kg
- silica sand: 4.83289e-6 kg
- silicone product: 2.79893e-7 kg
- soap: 5.81256e-9 kg
- sodium hydroxide, without water, in 50% solution state: 7.15818e-6 kg
- sodium hypochlorite, without water, in 15% solution state: 1.08443e-7 kg
- sodium percarbonate, powder: 3.81752e-7, 7.72999e-7 kg (2 suppliers, which the file names only by identifier); sum of these 1.15475e-6 kg
- sodium persulfate: 5.73565e-8 kg
- sodium phosphate: 7.45151e-14, 1.56969e-14 kg (2 suppliers, which the file names only by identifier); sum of these 9.0212e-14 kg
- sodium sulfate, anhydrite: 1.05062e-7, 1.71604e-8 kg (2 suppliers, which the file names only by identifier); sum of these 1.22223e-7 kg
- sodium tetrahydridoborate: 5.1759e-12 kg
- spent catalytic converter NOx reduction: -1.87753e-9 kg
- spent solvent mixture: -6.12751e-13, -5.60932e-15, -2.39423e-13 kg (3 suppliers, which the file names only by identifier); sum of these -8.57784e-13 kg
- steel, low-alloyed: 1.00183e-6 kg
- sulfidic tailings, generic: -0.000166623 kg
- sulfur: 1.71195e-7 kg
- sulfur dioxide, liquid: 1.05459e-7, 4.89723e-6 kg (2 suppliers, which the file names only by identifier); sum of these 5.00269e-6 kg
- sulfuric acid: 4.67815e-5, 5.89834e-6 kg (2 suppliers, which the file names only by identifier); sum of these 5.26798e-5 kg
- tap water: 1.58362e-8, 0.000685557, 6.59953e-7, 2.61719e-8, 3.29785e-5, 4.88355e-8, 7.55218e-6, 1.71685e-8, 1.31559e-7 kg (9 suppliers, which the file names only by identifier); sum of these 0.000726987 kg
- toluene, liquid: 4.12451e-7 kg
- transport, freight train: 4.58389e-5 metric ton*km
- transport, freight, inland waterways, barge: 1.47097e-6 metric ton*km
- transport, freight, lorry 16-32 metric ton, EURO4: 1.0148e-5, 1.18228e-6 metric ton*km (2 suppliers, which the file names only by identifier); sum of these 1.13303e-5 metric ton*km
- transport, freight, lorry >32 metric ton, EURO4: 6.8261e-5, 7.95272e-6 metric ton*km (2 suppliers, which the file names only by identifier); sum of these 7.62137e-5 metric ton*km
- transport, freight, lorry, unspecified: 1.75834e-10 metric ton*km
- transport, freight, sea, bulk carrier for dry goods: 0.000187074 metric ton*km
- trichloromethane: 1.42094e-5 kg
- waste gypsum: -3.21385e-7, -2.21358e-5 kg (2 suppliers, which the file names only by identifier); sum of these -2.24572e-5 kg
- waste mineral oil: -9.74991e-12, -1.03121e-9, -3.9384e-10 kg (3 suppliers, which the file names only by identifier); sum of these -1.4348e-9 kg
- waste refinery gas: -0.000103082 MJ
- wastewater, average: -3.94542e-8, -2.33752e-8, -6.56537e-6, -1.56991e-6 m3 (4 suppliers, which the file names only by identifier); sum of these -8.19811e-6 m3
- water, decarbonised: 0.000257688, 3.43376e-5, 6.81772e-6, 2.1474e-8, 3.38189e-5, 1.68576e-6, 2.2418e-5, 0.000218742, 0.000138491, 4.10806e-5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 kg (13 suppliers, which the file names only by identifier); sum of these 0.000787171 kg
- water, deionised: 7.13288e-7, 0.000198149, 0.000643255 kg (3 suppliers, which the file names only by identifier); sum of these 0.000842117 kg
- water, harvested from rainwater: 2.77463e-6 kg
- zeolite, powder: 8.02326e-7 kg
- zinc: 2.00896e-10 kg

## Inputs from nature
- Aluminium [natural resource, in ground]: 9.9414e-6 kg
- Arsenic [natural resource, in ground]: 2.43121e-8 kg
- Calcium [natural resource, in ground]: 1.53166e-6 kg
- Chromium [natural resource, in ground]: 3.3661e-6 kg
- Cobalt [natural resource, in ground]: 1.12774e-6 kg
- Copper [natural resource, in ground]: 2.38131e-5 kg
- Gangue [natural resource, in ground]: 0.000497034 kg
- Gold [natural resource, in ground]: 7.29403e-13 kg
- Iron [natural resource, in ground]: 0.000335292 kg
- Lead [natural resource, in ground]: 2.43121e-8 kg
- Magnesium [natural resource, in ground]: 1.56858e-5 kg
- Manganese [natural resource, in ground]: 1.81677e-6 kg
- Nickel [natural resource, in ground]: 1.29274e-5 kg
- Rhenium [natural resource, in ground]: 7.66245e-13 kg
- Silicon [natural resource, in ground]: 6.11982e-5 kg
- Silver [natural resource, in ground]: 1.31293e-11 kg
- Sulfur [natural resource, in ground]: 0.000175751 kg
- Water, cooling, unspecified natural origin [natural resource, in water]: 0.000260904 m3
- Water, lake [natural resource, in water]: 2.15091e-7 m3
- Water, river [natural resource, in water]: 1.50738e-6 m3
- Water, salt, ocean [natural resource, in water]: 2.09008e-9 m3
- Water, unspecified natural origin [natural resource, in water]: 2.08989e-5 m3
- Water, well, in ground [natural resource, in water]: 7.87028e-8 m3
- Zinc [natural resource, in ground]: 4.86242e-8 kg

## Emissions to nature
- Acetic acid [air, unspecified]: 2.72888e-13 kg
- Ammonia [air, unspecified]: 1.84607e-8 kg
- Ammonia [air, urban air close to ground]: 1.59412e-10 kg
- Antimony ion [air, unspecified]: 5.24833e-10 kg
- Arsenic ion [air, unspecified]: 1.39685e-9 kg
- Benzene [air, unspecified]: 9.28071e-8 kg
- Benzene [air, urban air close to ground]: 1.27746e-8 kg
- Benzene, ethyl- [air, urban air close to ground]: 3.18823e-9 kg
- Benzo(a)pyrene [air, unspecified]: 2.8846e-12 kg
- Beryllium II [air, unspecified]: 1.27719e-11 kg
- Butane [air, urban air close to ground]: 1.27746e-7 kg
- Butene [air, urban air close to ground]: 3.18823e-9 kg
- Cadmium II [air, unspecified]: 1.19639e-9 kg
- Calcium [air, unspecified]: 7.36151e-11 kg
- Carbon dioxide, fossil [air, unspecified]: 0.00653325 kg
- Carbon dioxide, non-fossil [air, unspecified]: 4.22256e-6 kg
- Carbon monoxide, fossil [air, unspecified]: 2.23137e-6 kg
- Carbonyl sulfide [air, unspecified]: 3.67561e-11 kg
- Chlorine [air, unspecified]: 2.90604e-11 kg
- Chloroform [air, urban air close to ground]: 8.88087e-10 kg
- Chromium III [air, unspecified]: 1.09832e-7 kg
- Cobalt II [air, unspecified]: 3.04004e-9 kg
- Copper ion [air, unspecified]: 1.09204e-8 kg
- Cyanide [air, unspecified]: 7.82632e-12 kg
- Dinitrogen monoxide [air, unspecified]: 2.21018e-7 kg
- Dinitrogen monoxide [air, urban air close to ground]: 2.58095e-9 kg
- Dioxins, measured as 2,3,7,8-tetrachlorodibenzo-p-dioxin [air, unspecified]: 2.08386e-15 kg
- Ethane [air, urban air close to ground]: 3.18823e-8 kg
- Ethane, 1,1,1,2-tetrafluoro-, HFC-134a [air, urban air close to ground]: 3.23743e-10 kg
- Ethylene [air, urban air close to ground]: 6.37646e-9 kg
- Formaldehyde [air, unspecified]: 2.64185e-8 kg
- Furfural [air, unspecified]: 8.79427e-9 kg
- Heat, waste [air, unspecified]: 0.0163002 MJ
- Heptane [air, urban air close to ground]: 3.18823e-8 kg
- Hexane [air, urban air close to ground]: 6.37646e-8 kg
- Hydrocarbons, aliphatic, alkanes, unspecified [air, urban air close to ground]: 9.71652e-14 kg
- Hydrocarbons, aliphatic, unsaturated [air, urban air close to ground]: 5.33541e-15 kg
- Hydrocarbons, aromatic [air, urban air close to ground]: 1.45748e-15 kg
- Hydrochloric acid [air, unspecified]: 1.19932e-11 kg
- Hydrochloric acid [air, urban air close to ground]: 4.97329e-8 kg
- Hydrogen [air, unspecified]: 6.59858e-6 kg
- Hydrogen fluoride [air, unspecified]: 1.19102e-8 kg
- Hydrogen fluoride [air, urban air close to ground]: 2.75307e-8 kg
- Hydrogen sulfide [air, unspecified]: 5.26977e-9 kg
- Lead II [air, unspecified]: 7.86465e-9 kg
- Manganese II [air, unspecified]: 6.78297e-10 kg
- Mercury II [air, unspecified]: 1.2153e-10 kg
- Methane, chlorodifluoro-, HCFC-22 [air, urban air close to ground]: 3.52433e-8 kg
- Methane, dichlorodifluoro-, CFC-12 [air, urban air close to ground]: 7.41507e-9 kg
- Methane, dichlorofluoro-, HCFC-21 [air, urban air close to ground]: 9.76896e-11 kg
- Methane, fossil [air, unspecified]: 5.86513e-7 kg
- Methane, fossil [air, urban air close to ground]: 3.57863e-8 kg
- Methane, trichlorofluoro-, CFC-11 [air, urban air close to ground]: 1.03993e-10 kg
- Methane, trifluoro-, HFC-23 [air, urban air close to ground]: 3.10831e-8 kg
- Methanol [air, urban air close to ground]: 1.44583e-8 kg
- Methyl ethyl ketone [air, unspecified]: 7.65981e-10 kg
- NMVOC, non-methane volatile organic compounds [air, unspecified]: 6.84266e-6 kg
- Nickel II [air, unspecified]: 6.08021e-8 kg
- Nitrogen [air, unspecified]: 1.37697e-7 kg
- Nitrogen oxides [air, unspecified]: 7.73473e-6 kg
- Nitrogen oxides [air, urban air close to ground]: 4.90164e-8 kg
- PAH, polycyclic aromatic hydrocarbons [air, unspecified]: 3.58575e-10 kg
- Palladium II [air, unspecified]: 1.20059e-11 kg
- Particulate Matter, < 2.5 um [air, unspecified]: 1.50178e-6 kg
- Particulate Matter, > 10 um [air, unspecified]: 5.61854e-6 kg
- Particulate Matter, > 10 um [air, urban air close to ground]: 2.16887e-8 kg
- Particulate Matter, > 2.5 um and < 10um [air, unspecified]: 7.33402e-7 kg
- Pentane [air, urban air close to ground]: 1.59629e-7 kg
- Platinum [air, unspecified]: 1.20059e-11 kg
- Propane [air, urban air close to ground]: 1.27746e-7 kg
- Propene [air, urban air close to ground]: 6.37646e-9 kg
- Rhodium III [air, unspecified]: 1.20059e-11 kg
- Selenium IV [air, unspecified]: 1.31828e-9 kg
- Silver I [air, unspecified]: 4.44082e-14 kg
- Sulfur dioxide [air, unspecified]: 3.76365e-5 kg
- Sulfur dioxide [air, urban air close to ground]: 8.26338e-8 kg
- Sulfur trioxide [air, unspecified]: 7.32588e-8 kg
- Sulfuric acid [air, unspecified]: 1.10707e-9 kg
- Tellurium [air, unspecified]: 1.70536e-11 kg
- Thallium I [air, unspecified]: 3.73012e-10 kg
- Tin ion [air, unspecified]: 1.43757e-9 kg
- Toluene [air, urban air close to ground]: 1.91511e-8 kg
- VOC, volatile organic compounds [air, unspecified]: 3.17163e-9 kg
- Vanadium V [air, unspecified]: 1.19391e-7 kg
- Water [air, unspecified]: 1.12758e-5 m3
- Xylene [air, unspecified]: 1.3643e-7 kg
- Xylene [air, urban air close to ground]: 1.27746e-8 kg
- Zinc II [air, unspecified]: 3.97109e-9 kg
- Sulfur [soil, industrial]: 4.85039e-9 kg
- AOX, Adsorbable Organic Halogen [water, surface water]: 1.90986e-11 kg
- AOX, Adsorbable Organic Halogen [water, unspecified]: 2.8801e-9 kg
- Aluminium III [water, surface water]: 6.13789e-11 kg
- Aluminium III [water, unspecified]: 1.21648e-9 kg
- Ammonium [water, surface water]: 6.6374e-9 kg
- Ammonium [water, unspecified]: 3.0241e-8 kg
- Antimony ion [water, surface water]: 3.19711e-10 kg
- Arsenic ion [water, ocean]: 3.75068e-12 kg
- Arsenic ion [water, surface water]: 1.3172e-11 kg
- Arsenic ion [water, unspecified]: 4.32015e-11 kg
- BOD5, Biological Oxygen Demand [water, surface water]: 8.6217e-9 kg
- BOD5, Biological Oxygen Demand [water, unspecified]: 1.44005e-7 kg
- Barium II [water, surface water]: 1.22758e-10 kg
- Barium II [water, unspecified]: 2.89325e-9 kg
- Benzene [water, surface water]: 2.71009e-11 kg
- Benzene [water, unspecified]: 1.44005e-11 kg
- Benzene, ethyl- [water, surface water]: 2.4904e-13 kg
- Boron [water, surface water]: 4.90164e-10 kg
- Boron [water, unspecified]: 5.7602e-9 kg
- COD, Chemical Oxygen Demand [water, surface water]: 6.76022e-8 kg
- COD, Chemical Oxygen Demand [water, unspecified]: 9.50433e-7 kg
- Cadmium II [water, ocean]: 4.48809e-13 kg
- Cadmium II [water, surface water]: 1.2417e-11 kg
- Cadmium II [water, unspecified]: 1.44005e-11 kg
- Calcium II [water, surface water]: 6.13789e-8 kg
- Chloride [water, surface water]: 9.70589e-7 kg
- Chloride [water, unspecified]: 1.01399e-5 kg
- Chloroform [water, surface water]: 9.76896e-11 kg
- Chromium III [water, surface water]: 2.79816e-10 kg
- Chromium III [water, unspecified]: 1.44005e-11 kg
- Chromium VI [water, unspecified]: 2.8801e-11 kg
- Cobalt II [water, ocean]: 4.84449e-11 kg
- Cobalt II [water, surface water]: 3.7947e-10 kg
- Cobalt II [water, unspecified]: 1.44005e-11 kg
- Copper ion [water, ocean]: 1.02962e-11 kg
- Copper ion [water, surface water]: 1.58701e-10 kg
- Copper ion [water, unspecified]: 7.20025e-10 kg
- Cyanide [water, surface water]: 2.12906e-10 kg
- Cyanide [water, unspecified]: 2.16007e-10 kg
- DOC, Dissolved Organic Carbon [water, surface water]: 1.26734e-9 kg
- DOC, Dissolved Organic Carbon [water, unspecified]: 1.97575e-7 kg
- Fluoride [water, surface water]: 5.48723e-9 kg
- Fluoride [water, unspecified]: 1.15204e-8 kg
- Heat, waste [water, unspecified]: 0.00353908 MJ
- Hydrocarbons, aromatic [water, surface water]: 8.82728e-10 kg
- Hydrocarbons, unspecified [water, surface water]: 2.97832e-10 kg
- Hydrocarbons, unspecified [water, unspecified]: 2.16007e-8 kg
- Hydrogen sulfide [water, surface water]: 1.79644e-11 kg
- Iron ion [water, ocean]: 2.33082e-9 kg
- Iron ion [water, surface water]: 6.13789e-10 kg
- Iron ion [water, unspecified]: 5.7602e-9 kg
- Lead II [water, surface water]: 3.89573e-10 kg
- Lead II [water, unspecified]: 1.44005e-11 kg
- Magnesium [water, surface water]: 3.0581e-8 kg
- Manganese II [water, surface water]: 2.45082e-10 kg
- Manganese II [water, unspecified]: 1.15204e-9 kg
- Mercury II [water, ocean]: 4.65483e-14 kg
- Mercury II [water, surface water]: 1.22758e-13 kg
- Mercury II [water, unspecified]: 2.8801e-12 kg
- Molybdenum VI [water, surface water]: 1.22758e-11 kg
- Molybdenum VI [water, unspecified]: 1.44005e-10 kg
- Nickel II [water, ocean]: 6.75019e-11 kg
- Nickel II [water, surface water]: 1.88564e-10 kg
- Nickel II [water, unspecified]: 1.44005e-10 kg
- Nitrate [water, surface water]: 1.00852e-8 kg
- Nitrate [water, unspecified]: 5.52793e-9 kg
- Nitrite [water, unspecified]: 8.76552e-10 kg
- Nitrogen [water, ocean]: 2.61053e-8 kg
- Nitrogen [water, unspecified]: 7.85585e-8 kg
- Nitrogen, organic bound [water, surface water]: 1.39442e-8 kg
- Oils, unspecified [water, surface water]: 7.38224e-10 kg
- PAH, polycyclic aromatic hydrocarbons [water, surface water]: 1.90986e-11 kg
- PAH, polycyclic aromatic hydrocarbons [water, unspecified]: 1.00803e-11 kg
- Phenol [water, surface water]: 2.77764e-10 kg
- Phenol [water, unspecified]: 1.44005e-9 kg
- Phosphorus [water, surface water]: 4.74982e-10 kg
- Phosphorus [water, unspecified]: 8.6403e-9 kg
- Potassium I [water, surface water]: 1.22758e-8 kg
- Selenium IV [water, surface water]: 1.84137e-11 kg
- Selenium IV [water, unspecified]: 5.7602e-10 kg
- Silver I [water, surface water]: 6.13789e-11 kg
- Sodium I [water, surface water]: 9.42412e-7 kg
- Sodium I [water, unspecified]: 1.2663e-6 kg
- Strontium [water, surface water]: 8.58871e-10 kg
- Sulfate [water, surface water]: 2.71002e-6 kg
- Sulfate [water, unspecified]: 7.50601e-6 kg
- Sulfide [water, surface water]: 1.22758e-10 kg
- Sulfide [water, unspecified]: 7.20025e-10 kg
- Sulfuric acid [water, surface water]: 3.17799e-9 kg
- Suspended solids, unspecified [water, surface water]: 3.19504e-8 kg
- Suspended solids, unspecified [water, unspecified]: 2.16007e-7 kg
- TOC, Total Organic Carbon [water, surface water]: 2.87805e-8 kg
- TOC, Total Organic Carbon [water, unspecified]: 2.01607e-7 kg
- Tin ion [water, unspecified]: 1.44005e-10 kg
- Toluene [water, surface water]: 1.22758e-9 kg
- Vanadium V [water, surface water]: 3.74487e-11 kg
- Vanadium V [water, unspecified]: 2.8801e-10 kg
- Water [water, surface water]: 3.43004e-10 m3
- Water [water, unspecified]: 0.000264979 m3
- Xylene [water, surface water]: 1.22758e-10 kg
- Xylene [water, unspecified]: 1.44005e-11 kg
- Zinc II [water, ocean]: 3.32785e-12 kg
- Zinc II [water, surface water]: 2.65111e-10 kg
- Zinc II [water, unspecified]: 4.32015e-10 kg
- t-Butyl methyl ether [water, surface water]: 1.60655e-10 kg
- t-Butyl methyl ether [water, unspecified]: 2.8801e-10 kg

## Sampling procedure
The 2 Swiss HWI plants, used as the inventory reference technology mix, have a total annual capacity of 53'000 tons of hazardous waste. This corresponds to 39% of the Swiss total installed capacity in 2000. Swiss average plants size is 20'000 t/a.

## Extrapolations
Available waste composition data. Transfer coefficients from one modern HWI completed with data from MSWI. Waste-specific auxiliary material consumption adapted from MSWI.
