# synthetic gas factory construction

Dataset: EcoSpold 2, unit process
Geography: RoW
Time period: 2004-01-01 to 2022-12-31
Technology level: current
Classification: ISIC rev.4 ecoinvent: 4290:Construction of other civil engineering projects
Classification: EcoSpold01Categories: biomass/fuels
Synonyms: producer gas; syngas; town gas; synthesis gas
Tags: ConvertedDataset
Scenario: Business-as-Usual
System model: Allocation at the point of substitution
Share of production covered: 0 %
Generated by: Arnaud Dauriat
Published in: Jungbluth N. 2007
Database: ecoinvent
isCopyrightProtected: true

## General comment
Lifetime is assumed to be 50 years. Typical biomass gasifier of 5 MWth output (i.e. 7.2-7.6 MWth input) capacity, processing 32-35 t/day of wood (dry matter) to 80'000-83'000 Nm3/day of syngas (330 day/yr).
[This dataset was already contained in the ecoinvent database version 2. It was not individually updated during the transfer to ecoinvent version 3. Life Cycle Impact Assessment results may still have changed, as they are affected by changes in the supply chain, i.e. in other datasets. This dataset was generated following the ecoinvent quality guidelines for version 2. It may have been subject to central changes described in the ecoinvent version 3 change report (http://www.ecoinvent.org/database/ecoinvent-version-3/reports-of-changes/), and the results of the central updates were reviewed extensively. The changes added e.g. consistent water flows and other information throughout the database. The documentation of this dataset can be found in the ecoinvent reports of version 2, which are still available via the ecoinvent website. The change report linked above covers all central changes that were made during the conversion process.]

## Included activities end
This infrastructure process includes land use, buildings and facilities (including dismantling) of a typical biomass gasifier. Process includes the dryer, the comminution equipment, the gasifier and the gas treatment and conditioning facility.

## Geography
CH, not site-specific

## Technology
Swiss production of syngas is limited to pilot-scale fixed-bed gasifiers (Pyroforce, Xylowatt). Data is not specific to the technology (i.e. fixed bed or fluidised bed).

## Reference product
- synthetic gas factory: 1 unit; By-product classification allocatable product; CPC 53269: Other constructions for manufacturing
  EcoSpold01Location=CH
  production volume 3.96633 unit
    This is a placeholder value that does not reflect real-world production volumes. This dataset does not currently require a real-world production volume to work in the database framework, and no actual data were collected yet. This has no negative effect on the results of the ecoinvent database.
  property price 2.96138e6 EUR2005
    Convert from EU 27 price to the world by currency exchange rate.
  properties: carbon allocation 0 kg, carbon content 0

## Inputs from technosphere
- aluminium, cast alloy: 230.4 kg; lognormal variance with pedigree 0.142, pedigree (3,5,5,5,4)
  EcoSpold01Location=RER
  Adapted from 'Industrial furnace, coal, 1-10 MW', factor 2, 50 yrs lifetime
  Uncertainty: Adapted from 'Industrial furnace, coal, 1-10 MW', factor 2, 50 yrs lifetime
  properties: dry mass 1 kg, wet mass 1 kg
- aluminium, wrought alloy: 489.6 kg; lognormal variance with pedigree 0.142, pedigree (3,5,5,5,4)
  Adapted from 'Industrial furnace, coal, 1-10 MW', factor 2, 50 yrs lifetime
  EcoSpold01Location=RER
  Uncertainty: Adapted from 'Industrial furnace, coal, 1-10 MW', factor 2, 50 yrs lifetime
  properties: dry mass 1 kg, wet mass 1 kg
- concrete, normal strength: 4.23205, 0.807179, 0.604483, 8.9189, 0.929338, 7.52364, 319.063, 17.9215 m3 (8 suppliers, which the file names only by identifier); sum of these 360 m3; lognormal variance with pedigree 0.142, pedigree (3,5,5,5,4)
  Adapted from 'Industrial furnace, coal, 1-10 MW', factor 2, 50 yrs lifetime
  EcoSpold01Location=CH
  Uncertainty: Adapted from 'Industrial furnace, coal, 1-10 MW', factor 2, 50 yrs lifetime
  properties: dry mass 2190 kg, water content 0.086758, wet mass 2380 kg
- copper, cathode: 1800 kg; lognormal variance with pedigree 0.142, pedigree (3,5,5,5,4)
  (same comment as for aluminium, cast alloy)
  properties: dry mass 1 kg, wet mass 1 kg
- diesel, burned in building machine: 1.08e6 MJ; lognormal variance with pedigree 0.142, pedigree (3,5,5,5,4)
  EcoSpold01Location=GLO
  Adapted from 'Industrial furnace, coal, 1-10 MW', factor 2, 50 yrs lifetime
  Uncertainty: Adapted from 'Industrial furnace, coal, 1-10 MW', factor 2, 50 yrs lifetime
  properties: heating value, net 1 MJ
- electricity, medium voltage: 11359.9, 3544.66, 105.56, 538.609, 7738.99, 32522.5, 2410.84, 1778.93 kWh (8 suppliers, which the file names only by identifier); sum of these 60000 kWh; lognormal variance with pedigree 0.142, pedigree (3,5,5,5,4)
  EcoSpold01Location=CH
  Adapted from 'Industrial furnace, coal, 1-10 MW', factor 2, 50 yrs lifetime
  Uncertainty: Adapted from 'Industrial furnace, coal, 1-10 MW', factor 2, 50 yrs lifetime
- heat, district or industrial, other than natural gas: 1.05272e6, 26788.6, 487.707 MJ (3 suppliers, which the file names only by identifier); sum of these 1.08e6 MJ; lognormal variance with pedigree 0.142, pedigree (3,5,5,5,4)
  (same comment as for electricity, medium voltage)
  properties: heating value, net 1 MJ
- reinforcing steel: 54000 kg; lognormal variance with pedigree 0.142, pedigree (3,5,5,5,4)
  (same comment as for aluminium, wrought alloy)
  properties: carbon content, fossil 0.004, dry mass 1 kg, wet mass 1 kg
- steel, low-alloyed, hot rolled: 18000 kg; lognormal variance with pedigree 0.142, pedigree (3,5,5,5,4)
  (same comment as for aluminium, wrought alloy)
  properties: carbon content, fossil 0.005, dry mass 1 kg, wet mass 1 kg
  note on carbon content, fossil: Low alloyed steel composition given in Tab. 3.2 ecoinvent v2.2 report 10_partII. Steel assumed to have a C content of 0.5%
- waste concrete, not reinforced: -56103.6, -800696 kg (2 suppliers, which the file names only by identifier); sum of these -856800 kg; lognormal variance with pedigree 0.11, pedigree (3,5,4,5,4)
  Calculation according to consumption and density of steel
  EcoSpold01Location=CH
  Uncertainty: Calculation according to consumption and density of steel
  production volume
    Calculated from the production volume of synthetic gas factory in proportion to the respective output amounts.
  properties: dry mass 1 kg, wet mass 1 kg
- waste reinforcement steel: -54000 kg; lognormal variance with pedigree 0.11, pedigree (3,5,4,5,4)
  EcoSpold01Location=CH
  Adapted from ecoinvent process 'Industrial furnace, coal, 1-10 MW'
  Uncertainty: Adapted from ecoinvent process 'Industrial furnace, coal, 1-10 MW'
  production volume
    (same comment as for waste concrete, not reinforced)
  properties: dry mass 1 kg, wet mass 1 kg

## Inputs from nature
- Occupation, construction site [natural resource, land]: 9600 m2*year; lognormal variance with pedigree 0.172, pedigree (3,5,5,5,4)
  Adapted from 'Industrial furnace, coal, 1-10 MW', factor 2, 50 yrs lifetime
  Uncertainty: Adapted from 'Industrial furnace, coal, 1-10 MW', factor 2, 50 yrs lifetime
- Occupation, industrial area [natural resource, land]: 240000 m2*year; lognormal variance with pedigree 0.172, pedigree (3,5,5,5,4)
  (same comment as for Occupation, construction site)
- Transformation, from unspecified [natural resource, land]: 4800 m2; lognormal variance with pedigree 0.252, pedigree (3,5,5,5,4)
  (same comment as for Occupation, construction site)
- Transformation, to industrial area [natural resource, land]: 4800 m2; lognormal variance with pedigree 0.252, pedigree (3,5,5,5,4)
  (same comment as for Occupation, construction site)

## Sampling procedure
Dataser was adapted from ecoinvent process 'industrial furnace, coal, 1-10 MW'.

## Extrapolations
none This dataset has been copied from an original dataset covering the geography CH. The uncertainty has been adjusted accordingly.

## Review by Niels Jungbluth 2005-12-02
Passed.
