# combine harvesting

Dataset: EcoSpold 2, unit process
Geography: CH
Time period: 1991-01-01 to 2022-12-31
Technology level: current
Classification: ISIC rev.4 ecoinvent: 0161:Support activities for crop production
Classification: EcoSpold01Categories: agricultural means of production/work processes
Tags: ConvertedDataset
Scenario: Business-as-Usual
System model: Allocation at the point of substitution
Generated by: Silvio Blaser
Published in: Nemecek, T. 2007
Database: ecoinvent
isCopyrightProtected: true

## General comment
This dataset represents an example of a typical combine harvesting. The working width is 4.5m. The functional unit (FU) is one ha harvested. The operation time is 1.3 h/FU.
[This dataset was already contained in the ecoinvent database version 2. It was not individually updated during the transfer to ecoinvent version 3. Life Cycle Impact Assessment results may still have changed, as they are affected by changes in the supply chain, i.e. in other datasets. This dataset was generated following the ecoinvent quality guidelines for version 2. It may have been subject to central changes described in the ecoinvent version 3 change report (http://www.ecoinvent.org/database/ecoinvent-version-3/reports-of-changes/), and the results of the central updates were reviewed extensively. The changes added e.g. consistent water flows and other information throughout the database. The documentation of this dataset can be found in the ecoinvent reports of version 2, which are still available via the ecoinvent website. The change report linked above covers all central changes that were made during the conversion process.]

## Included activities start
From agricultural field foreseen to be processed.

## Included activities end
This activity ends with the delivery of harvesting by combined harvester.The dataset includes the diesel fuel consumption and the amount of agricultural machinery and of the shed attributed to harvesting. It was also taken into consideration the amount of emissions to the air from combustion and the emission to the soil from tyre abrasion during the work process. The following activities where considered part of the work process: preliminary work at the farm, such as attaching the adequate machine to the tractor; driving to field (with an assumed distance of 1 km); field work (for a parcel of land of 1 ha surface); driving to farm and concluding work, like uncoupling the machine. The overlapping during the field work is considered. The dataset doesn't include the grain production, straw treatment, dust other than from combustion and noise.

## Geography
The inventory applies for Swiss Agricultural Field Work processes.

## Technology
The inventories are based on measurements made by the Swiss Federal Research Station for Agricultural Economics and Engineering of Taenikon (FAT). Fuel consumption and emissions were taken from recent literature of ART, expert's estimations or unpublished data.

## Time period
Measurements were made in the last few years (1999-2001).

## Reference product
- combine harvesting: 1 ha; By-product classification allocatable product; CPC 86119: Other support services to crop production
  production volume 145385 ha
    FAOSTAT data year 2011 (total area of cereals)
  property price 54.5278 EUR2005
    Calculated based on inputs: The price of the product has been calculated as a sum of the values of the material and energy inputs for this product. This value is therefore a rough estimation. It may underestimate the real price since there are additional expenses when producing any product. These expences can include for example labour costs, treatment of waste materials and profit for the producer. Please consider carefully whether this level of data quality is acceptable for your application.
  properties: carbon allocation 0 kg, carbon content 0

## Inputs from technosphere
- diesel: 33.3 kg; lognormal variance with pedigree 0.042, pedigree (1,4,5,1,1)
  Proxy, based on 'Agricultural Field Work Processes' - pdf-document on the dedicated talk page of ecoinvent (www.ecoinvent.org/talk-pages)
  properties: carbon content, fossil 0.865, dry mass 1 kg, heating value, net 42.8 MJ, wet mass 1 kg
  note on carbon content, fossil: C-content of diesel is 86.5% (ecoinvent v2.2 report 6_IV, Tab 3.14)
- harvester: 6.3 kg; lognormal variance with pedigree 0.042, pedigree (1,4,5,1,1)
  (same comment as for diesel)
- shed: 0.00858 m2; lognormal variance with pedigree 0.342, pedigree (1,4,5,1,1)
  Proxy, based on 'Agricultural Field Work Processes' - pdf-document on the dedicated talk page of ecoinvent (www.ecoinvent.org/talk-pages)
  This exchange has an activity link directly to the producing activity because the product is primarily consumed in the same geographical area where it is produced.

## Emissions to nature
- Ammonia [air, non-urban air or from high stacks]: 0.000666 kg; lognormal variance with pedigree 0.0981, pedigree (1,2,5,1,3)
  (same comment as for diesel)
- Benzene [air, non-urban air or from high stacks]: 0.000243 kg; lognormal variance with pedigree 0.0981, pedigree (1,2,5,1,3)
  (same comment as for diesel)
- Benzo(a)pyrene [air, non-urban air or from high stacks]: 9.99e-7 kg; lognormal variance with pedigree 0.6981, pedigree (1,2,5,1,3)
  (same comment as for diesel)
- Cadmium II [air, non-urban air or from high stacks]: 3.33e-7 kg; lognormal variance with pedigree 0.6981, pedigree (1,2,5,1,3)
  (same comment as for diesel)
- Carbon dioxide, fossil [air, non-urban air or from high stacks]: 103 kg; lognormal variance with pedigree 0.0581, pedigree (1,2,5,1,3)
  (same comment as for diesel)
- Carbon monoxide, fossil [air, non-urban air or from high stacks]: 0.32 kg; lognormal variance with pedigree 0.692, pedigree (1,4,5,1,1)
  (same comment as for diesel)
- Chromium III [air, non-urban air or from high stacks]: 1.67e-6 kg; lognormal variance with pedigree 0.6981, pedigree (1,2,5,1,3)
  (same comment as for diesel)
- Copper ion [air, non-urban air or from high stacks]: 5.66e-5 kg; lognormal variance with pedigree 0.6981, pedigree (1,2,5,1,3)
  (same comment as for diesel)
- Dinitrogen monoxide [air, non-urban air or from high stacks]: 0.004 kg; lognormal variance with pedigree 0.0981, pedigree (1,2,5,1,3)
  (same comment as for diesel)
- Methane, fossil [air, non-urban air or from high stacks]: 0.0043 kg; lognormal variance with pedigree 0.0981, pedigree (1,2,5,1,3)
  (same comment as for diesel)
- NMVOC, non-methane volatile organic compounds [air, non-urban air or from high stacks]: 0.145 kg; lognormal variance with pedigree 0.082, pedigree (1,4,5,1,1)
  (same comment as for diesel)
- Nickel II [air, non-urban air or from high stacks]: 2.33e-6 kg; lognormal variance with pedigree 0.6981, pedigree (1,2,5,1,3)
  (same comment as for diesel)
- Nitrogen oxides [air, non-urban air or from high stacks]: 1.7 kg; lognormal variance with pedigree 0.082, pedigree (1,4,5,1,1)
  (same comment as for diesel)
- PAH, polycyclic aromatic hydrocarbons [air, non-urban air or from high stacks]: 0.00011 kg; lognormal variance with pedigree 0.3581, pedigree (1,2,5,1,3)
  (same comment as for diesel)
- Particulate Matter, < 2.5 um [air, non-urban air or from high stacks]: 0.149 kg; lognormal variance with pedigree 0.3581, pedigree (1,2,5,1,3)
  (same comment as for diesel)
- Selenium IV [air, non-urban air or from high stacks]: 3.33e-7 kg; lognormal variance with pedigree 0.0981, pedigree (1,2,5,1,3)
  (same comment as for diesel)
- Sulfur dioxide [air, non-urban air or from high stacks]: 0.0336 kg; lognormal variance with pedigree 0.0581, pedigree (1,2,5,1,3)
  (same comment as for diesel)
- Zinc II [air, non-urban air or from high stacks]: 3.33e-5 kg; lognormal variance with pedigree 0.6981, pedigree (1,2,5,1,3)
  (same comment as for diesel)
- Cadmium II [soil, agricultural]: 8.82e-7 kg; lognormal variance with pedigree 0.082, pedigree (1,4,5,1,1)
  (same comment as for diesel)
- Lead II [soil, agricultural]: 3.78e-6 kg; lognormal variance with pedigree 0.082, pedigree (1,4,5,1,1)
  (same comment as for diesel)
- Zinc II [soil, agricultural]: 0.00238 kg; lognormal variance with pedigree 0.082, pedigree (1,4,5,1,1)
  (same comment as for diesel)

## Sampling procedure
Data on fuel consumption and emissions of CO, HC and NOx are expert estimations based on measurements for comparable activities. The other emissions were calculated basing on literature data and the measured fuel consumption.

## Extrapolations
Processes are typical procedures for Switzerland around the year 2000, they are not statistical average processes.

## Review by Roland Hischier 2003-08-06
Passed.

## Review by Roland Hischier 2011-09-28
Transfer of documentation done.
