# operation, housing system, pig, fully-slatted floor

Dataset: EcoSpold 2, unit process
Geography: CA-QC
Time period: 1994-01-01 to 2022-12-31
Technology level: current
Classification: EcoSpold01Categories: agricultural means of production/buildings
Classification: ISIC rev.4 ecoinvent: 0145:Raising of swine/pigs
Tags: Operation
Scenario: Business-as-Usual
System model: Allocation at the point of substitution
Generated by: Dominique Maxime
Published in: OCO Technologies 2010
Database: ecoinvent
isCopyrightProtected: true

## General comment
The module includes the use of energy and auxiliary materials for the operation of lighting, ventilation, heating, feeding system, slurry agitator and pump, cleaning, drinking water. The functional unit is 1 fattening pig place during 1 year.

## Included activities end
The inventory takes into account the electricity and propane, and auxiliary materials like water for drinking and service, lubricating oil and cleaning agents for the use of the described module for one year. Also included is the use of the infrastructure with the binding of a certain part of the appropriate infrastructure module. Not taken into account were the direct emission of the animal husbandry, fodder production and produced waste water. Note that a wastewater flow is missing that should be added to ensure water mass balance across pig farm (see Modelling information for details and value).

## Geography
Energy and water data have been contextualized to the region of Québec. Other data of the inventory (e.g. infrastructure, oil) refer to Switzerland.

## Technology
The use of auxiliary materials are calculated for the conditions defined in the infrastructure-module with literature data and experts knowledge. Energy and water data are representative of Quebec farrow-to-finish swine production (about 75% of Quebec swine production)

## Time period
Period indicated in the reference.

## Parameters
- Quebec gross domestic product 2011: 3.11e11 USD(2011); name quebecGDP2011; lognormal variance with pedigree 0.0006, pedigree (1,1,1,1,1)
  Quebec Gross domestic product for 2011, expressed in 2011 USD. Source: Institut de la statistique du Québec. Converted from CAD to USD using a yearly average exchange rate of 0.989 CAD/USD (Source: bank of Canada).
- fraction, process water, to air: 0.2 dimensionless; lognormal variance with pedigree 0.092025, pedigree (4,4,3,2,4)
  Source: Quantis, 2012. Principales données et hypothèses pour l"évaluation du bilan eau du secteur porcin au Québec. Rapport pour la Fédération des Producteurs de Porc du Québec. Available at: http://www.calculateurcarboneeteau.leseleveursdeporcsduquebec.com/userfiles/files/pdf/fr/rapport.pdf
- fraction, tap water, to air: 0.2 dimensionless; lognormal variance with pedigree 0.092025, pedigree (4,4,3,2,4)
  (same comment as for fraction, process water, to air)
- world gross domestic product 2011: 7e13 USD(2011); name worldGDP2011; lognormal variance with pedigree 0.0006, pedigree (1,1,1,1,1)
  World Gross domestic product for 2011, expressed in 2011 USD. Source: World Bank.

## Reference product
- operation, housing system, pig, fully-slatted floor, per pig place: 1 unit; By-product classification allocatable product; CPC 8612: Animal husbandry services
  production volume 0.0177714 unit
    Gross approximation of Quebec production volume using relative value of Quebec GDP to world GDP
  property price 39.2931 EUR2005
    Calculated based on inputs: The price of the product has been calculated as a sum of the values of the material and energy inputs for this product. This value is therefore a rough estimation. It may underestimate the real price since there are additional expenses when producing any product. These expences can include for example labour costs, treatment of waste materials and profit for the producer. Please consider carefully whether this level of data quality is acceptable for your application.
  properties: carbon allocation 0 kg, carbon content 0

## Inputs from technosphere
- electricity, low voltage: 70.0304 kWh; source OCO Technologies 2010; lognormal variance with pedigree 0.070725, pedigree (2,2,5,2,1)
  Calculated value, from source data of 0.71 and 0.254 kWh/kg carcass weight of finished pig from piglet farrowing and from pig finishing, respectively (OCO, 2010).
- heat, district or industrial, natural gas: 145.881 MJ; source OCO Technologies 2010; lognormal variance with pedigree 0.070725, pedigree (2,2,5,2,1)
  Heat from propane (assuming 24.7 MJ/L propane) for building heating. Calculated value, from source data of 0.0613 and 0.02 L propane/kg carcass weight of finished pig from piglet farrowing and from pig finishing, respectively (OCO 2010).
  properties: heating value, net 1 MJ
- housing system, pig, fully-slatted floor, per pig place: 0.0333 unit; source Quantis 2012; lognormal variance with pedigree 0.3407, pedigree (2,2,5,1,1)
  A 30 yr life span is assumed for pig farm buildings in Québec like it is for dairy farm buildings.
- hydrogen peroxide, without water, in 50% solution state: 1.98045 kg; lognormal variance with pedigree 0.0727, pedigree (2,2,5,5,1)
  Amount of the parent dataset scaled to tap water input.
  properties: dry mass 1 kg, heating value, net 7.13 MJ, wet mass 1 kg
- lubricating oil: 0.00147 kg; lognormal variance with pedigree 0.0427, pedigree (2,2,5,5,1)
  Amount taken from the parent dataset.
  properties: carbon content, fossil 0.75, dry mass 1 kg, heating value, net 40.2 MJ, wet mass 1 kg
  note on carbon content, fossil: Lubricating oil is produced from diesel. C-content/dry mass of fats and oils considered 75%, from: ecoinvent v2.2 report, n 15a, pg 40
  note on heating value, net: Literature value, Source: IPCC 2006, 2006 IPCC Guidelines for National Greenhouse Gas Inventories, Prepared by the National Greenhouse Gas Inventories Programme, Eggleston H.S., Buendia L., Miwa K., Ngara T. and Tanabe K. (eds). Published: IGES, Japan
- tap water: 4841.11 kg; source Quantis 2012; lognormal variance with pedigree 0.042725, pedigree (3,2,5,2,2)
  drinking water (820.2 kg) and service water (4020.9 kg) for pigs, piglets and sows. Note that, in Quebec farm, water is supposedly taken from ground well (Source: Quantis, Groupe AGECO, and CIRAIG, 2012. Environmental and Socioeconomic Life Cycle Assessment Of Canadian Milk, LCA study and report prepared for Dairy Farmers of Canada)
  properties: carbon content, fossil 0.00178991, dry mass 0.000337476 kg, water content 2962.17, wet mass 1 kg
  note on carbon content, fossil: Bicarbonate content is 2.93 mol/m3. CO2 content is 0.1 mol/m3 (ecoinvent v2.2 report 8, Tab 93.1).

## Emissions to nature
- Water [air, unspecified]: 3.22076 m3; source Quantis 2012; lognormal variance with pedigree 0.082125, pedigree (3,2,5,2,1)
  Calculated value, considering the following evaporation rates: 20% for service water, 30% for drinking water (evaporation through animal transpiration), 66% for water contained in excreted urine and faeces before liquid manure storage.

## Sampling procedure
The inventory for energy and water data is from Québec LCA literature (source: Quantis, 2012 and OCO Technologies, 2010). Auxiliary materials (cleaning and lubricating oil) is based on mean values from CH and WEU.

## Extrapolations
Except for energy and water data which are representative of Québec region, and adpatation of infrastructure lifespan, this dataset has been extrapolated from an original dataset covering the geography CH. The uncertainty has been adjusted accordingly. The amount of hydrogen peroxyde has been scaled to water input.
Note that the functional unit refers to 1 fattening pig place during one year. So, conversion between head/livestock unit/fattening pig place was necessary using the following livestock unit (LU) data: 5 fattening pigs are worth 1 LU; 25 piglets are worth 1 LU; 4 sows (including the unweaned piglets) are worth 1 LU (source: http://www.mrchr.qc.ca/documents/amenagementautres/annexes.pdf). Hence, equivalencies are: 1 piglet is worth 5/25 fattening pig place, and 1 sow is worth 5/4 fattening pig place.
A wastewater flow has been identified and calculated that could not be added to the dataset because it is not included in the original parent dataset. The flow corresponds to a fraction of the wastewater generated in the housing system that is not directed with manure to the liquid manure storage (Quantis, 2012). The actual amount has been calculated so as to ensure water mass balance across the pig farm, assuming that overall water input to the pig farm (including water contained in the feed) less water output (emission to the air and water going out with finished pig, with dead animals and with manure) ends up as wastewater. Note that water input contained in feed and water output with animals and manure is inventoried outside this dataset, within the swine production dataset.
The user of the dataset should add this missing wastewater flow as follows:
wastewater, average= 0.8158 m3 per FU. Uncertainty: Variance of log-transformed data=0.04; Pedigree matrix=5,5,1,2,1

Quantis, 2012. Principales données et hypothèses pour l"évaluation du bilan eau du secteur porcin au Québec. Rapport pour la Fédération des Producteurs de Porc du Québec (FPPQ). http://www.calculateurcarboneeteau.leseleveursdeporcsduquebec.com/userfiles/files/pdf/fr/rapport.pdf
