# electricity, low voltage, residual mix

Dataset: EcoSpold 2, unit process
Geography: GR
Time period: 2021-01-01 to 2022-12-31
Technology level: current
Classification: ISIC rev.4 ecoinvent: 3510:Electric power generation, transmission and distribution
Scenario: Business-as-Usual
System model: Allocation at the point of substitution
Generated by: [System]
Database: ecoinvent
isCopyrightProtected: true

## General comment
This dataset describes the residual mix on the low voltage level in Greece. The residual mix is a virtual mix. It represents the energy mix of untracked consumption , i.e., electricity consumption that is not explicitly tracked through mechanisms such as Guarantees of Origin (GO). The shares have been calculated based on statistics from AIB (2022) following the methodology of grexel (2020).
The calculation area considered for the calculation of the residual mixes covers all members of EU28, Iceland, Norway, Serbia and Switzerland.
The residual mix of a country is calculated based on the domestic residual mix. The domestic residual mix represents the sum of all domestic electricity production considering imports and export outside the calculation area and issued and expired attributes.
In countries for which the volume of untracked consumption is smaller than the volume of the domestic residual mix, the composition of the residual mix is equal to the composition of the domestic residual mix. In countries for which the volume of untracked consumption is larger than the volume of the domestic residual mix, the European Attribute Mix (EAM) is used to account for the deficits. Thus, in countries with a deficit in their domestic residual mix, the residual mix is equal to the domestic residual mix plus the respective amount taken from the EAM. For a detailed description of the methodology refer to grexel (2020).
The composition of the residual mix of this activity is valid for the year 2021.
Sources:
- AIB (2022), Association of Issuing Bodies, European Residual Mixes, Results of the calculation of Residual Mixes for the calendar year 2021, Version 1.0, 2022-05-31, https://www.aib-net.org/facts/european-residual-mix/2021
- grexel (2020), Issuance Based Residual Mix Calculation Methodology, Published 31.03.2020, Version 1.1, https://www.aib-net.org/sites/default/files/assets/facts/residual-mix/2022/RM%20EAM%20IB%20Calculation%20Methodology%20V1_2.pdf

## Included activities start
This activity starts from 1kWh of electricity from untracked consumption.

## Included activities end
This activity ends with the transport of 1 kWh of low voltage electricity from untracked consumption in the transmission network over aerial lines and cables.
This dataset includes: - electricity inputs of the untracked consumption in this country - the transmission network - direct emissions to air (ozone and N2O). - electricity losses during transmission This dataset doesn't include - electricity losses during transformation, as these are included in the dataset for transformation - - SF6 emissions during the transmission, as these are allocated to the residual mix dataset for medium voltage. - SF6 emissions during production and deconstruction of the switchgear, as these are accounted for in the transmission network dataset.

## Technology
Average technology used to transmit and distribute electricity. Includes underground and overhead lines. Electricity production according to related technology datasets.
Electricity from untracked consumption. Average technology used to transmit and distribute electricity. Includes underground and overhead lines. Electricity production according to related technology datasets. Definition of the voltage levels: - High voltage level above 24 kV (large scale industry) - Medium voltage level between 1 kV and 24 kV (medium to small scale industry, service sector and public buildings) - Low voltage level below 1 kV (Households)

## Time period
The annual production volumes of this market are taken from AIB (2022). 2021 European Residual Mix - Results of the calculation of Residual Mixes for the calendar year 2021 (Version 1.0, 2022-05-31) and are valid for the year 2021. The data on the european residual mixes is based on the transactions of guarantees of origin representing the time period of 1.4.2021 - 31.3.2022.

## Reference product
- electricity, low voltage: 1 kWh; By-product classification allocatable product; CPC 17100: Electrical energy
  production volume 2.78565e10 kWh
    Calculated value. Based on AIB (2021), Association of Issuing Bodies, European Residual Mixes, Results of the calculation of Residual Mixes for the calendar year 2021, Version 1.0, 2022-05-31, https://www.aib-net.org/facts/european-residual-mix/2021
  property price 0.107 EUR2005
    Temporary price data. Calculated as 90% of purchasers price based on: IEA Key world energy statistics 2004 (www.iea.org/textbase/nppdf/free/2004/keyworld2004.pdf)
  properties: carbon allocation 0 kg, carbon content 0

## Inputs from technosphere
- distribution network, electricity, low voltage: 8.74049e-8 km; lognormal variance with pedigree 0.1507, pedigree (3,2,5,4,3)
  Estimation. Data taken over from Switzerland.
  Swiss data are calculated values based on the electricity transported in this voltage level (36796 GWh) and the total low voltage power line length in Switzerland (cables and aerial lines - 128646 km). Lifetime is assumed to be 40 years.
  See Itten&Frischknecht 2012, Tab. 4.1 and Tab. 4.3.
- electricity, low voltage: 0.0724312, 0.00172965, 0.00194586, 0.0581842, 3.32808e-5, 4.43744e-5 kWh (6 suppliers, which the file names only by identifier); sum of these 0.134369 kWh
  Calcualted value. Shares of electricity producing technologies based on Tab. 2 of AIB(2021). Technology splits of corresponding ecoinvent electricity markets are used.
  AIB (2021), Association of Issuing Bodies, European Residual Mixes, Results of the calculation of Residual Mixes for the calendar year 2021, Version 1.0, 2022-05-31, https://www.aib-net.org/facts/european-residual-mix/2021
- electricity, low voltage: 0.857346 kWh
  Electricity transformed from medium to low voltage level.
- electricity, low voltage: 0.00828506 kWh
  Calculated Value. For this country the domestic residual mix has lower volume than the final residual mix, thus the missing electricity is supplied by the European Attribute Mix (EAM). The EAM is a virtual mix and is calculated as the sum of all surplus attributes from countries with a domestic residual mix larger than the national consumption.
- electricity, low voltage: 0.0261091 kWh
  Calculated Value. Represents losses occuring during transmission of the electricity.
- sulfur hexafluoride, liquid: 6.27e-9 kg; lognormal variance with pedigree 0.04, pedigree (1,1,5,1,1)
  Estimated value. It is assumed that all the emitted SF6 is replaced
  properties: dry mass 1 kg, wet mass 1 kg

## Emissions to nature
- Sulfur hexafluoride [air, unspecified]: 6.27e-9 kg; lognormal variance with pedigree 0.0443, pedigree (3,2,5,4,2)
  Calculated value. Total quantity per year divided by total transported energy
