# baling

Dataset: EcoSpold 2, unit process
Geography: CH
Time period: 1991-01-01 to 2022-12-31
Technology level: current
Classification: ISIC rev.4 ecoinvent: 0163:Post-harvest crop activities
Classification: EcoSpold01Categories: agricultural means of production/work processes
Tags: ConvertedDataset
Scenario: Business-as-Usual
System model: Allocation at the point of substitution
Generated by: Silvio Blaser
Published in: Nemecek, T. 2007
Database: ecoinvent
isCopyrightProtected: true

## General comment
This dataset represents an example of a typical baling process. Round baler for round bales of 1.4 m3 for silage bale with wrapping foil, 700kg. Time is needed for baling and wrapping, without loading and transport. Wrapping foil (PE-film) is included. Fodder production and cutting were not included. The functional unit (FU) is one bale. The operation time is 0.13 h/FU. For baling of straw or hay, a rough estimation is possible: baling hay or straw = 0.23 * baling silage.
[This dataset was already contained in the ecoinvent database version 2. It was not individually updated during the transfer to ecoinvent version 3. Life Cycle Impact Assessment results may still have changed, as they are affected by changes in the supply chain, i.e. in other datasets. This dataset was generated following the ecoinvent quality guidelines for version 2. It may have been subject to central changes described in the ecoinvent version 3 change report (http://www.ecoinvent.org/database/ecoinvent-version-3/reports-of-changes/), and the results of the central updates were reviewed extensively. The changes added e.g. consistent water flows and other information throughout the database. The documentation of this dataset can be found in the ecoinvent reports of version 2, which are still available via the ecoinvent website. The change report linked above covers all central changes that were made during the conversion process.]

## Included activities start
From reception of silage to be baled.

## Included activities end
This activity ends with the delivery of baling. The dataset includes the diesel fuel consumption and the amount of agricultural machinery and of the shed attributed to baling. It was also taken into consideration the amount of emissions to the air from combustion and the emission to the soil from tyre abrasion during the work process. The following activities where considered part of the work process: preliminary work at the farm, such as attaching the adequate machine to the tractor; driving to field (with an assumed distance of 1 km); field work; driving to farm and concluding work, like uncoupling the machine. The overlapping during the field work is considered. The dataset doesn't include the amount of sprayed plant protection products and the dust other than from combustion and noise.

## Geography
The inventory applies for Swiss Agricultural Field Work processes.

## Technology
The inventories are based on measurements made by the Swiss Federal Research Station for Agricultural Economics and Engineering of Taenikon (FAT). Fuel consumption and emissions were taken from recent literature of ART, expert's estimations or unpublished data.

## Time period
Measurements were made in the last few years (1999-2001).

## Reference product
- baling: 1 unit; By-product classification allocatable product; CPC 86111: Post-harvest crop services
  production volume 699212 unit
    FAOSTAT data year 2011 for amount of cereals produced, weight 160kg straw/bale, Conversion factor 0.23 (ecoinvent report 15, V2.0, 2007), 50% of straw harvested, total straw yield assumed same as grain yield
  property price 1.71121 EUR2005
    Calculated based on inputs: The price of the product has been calculated as a sum of the values of the material and energy inputs for this product. This value is therefore a rough estimation. It may underestimate the real price since there are additional expenses when producing any product. These expences can include for example labour costs, treatment of waste materials and profit for the producer. Please consider carefully whether this level of data quality is acceptable for your application.
  properties: carbon allocation 0 kg, carbon content 0

## Inputs from technosphere
- agricultural machinery, unspecified: 0.152 kg; lognormal variance with pedigree 0.042, pedigree (1,4,5,1,1)
  Proxy, based on 'Agricultural Field Work Processes' - pdf-document on the dedicated talk page of ecoinvent (www.ecoinvent.org/talk-pages)
- diesel: 0.743 kg; lognormal variance with pedigree 0.042, pedigree (1,4,5,1,1)
  (same comment as for agricultural machinery, unspecified)
  properties: carbon content, fossil 0.865, dry mass 1 kg, heating value, net 42.8 MJ, wet mass 1 kg
  note on carbon content, fossil: C-content of diesel is 86.5% (ecoinvent v2.2 report 6_IV, Tab 3.14)
- extrusion, plastic film: 1 kg; lognormal variance with pedigree 0.042, pedigree (1,4,5,1,1)
  (same comment as for agricultural machinery, unspecified)
- polyethylene, high density, granulate: 1 kg; lognormal variance with pedigree 0.042, pedigree (1,4,5,1,1)
  (same comment as for agricultural machinery, unspecified)
  properties: carbon content, fossil 0.857143, dry mass 1 kg, heating value, net 42.47 MJ, wet mass 1 kg
  note on carbon content, fossil: Polyethylene is formed out of a huge amount of ethylene monomers (C2H4) (ecoinvent v2.2 report 11_II). MW=28 g/mol
- shed: 0.000247 m2; lognormal variance with pedigree 0.342, pedigree (1,4,5,1,1)
  Proxy, based on 'Agricultural Field Work Processes' - pdf-document on the dedicated talk page of ecoinvent (www.ecoinvent.org/talk-pages)
  This exchange has an activity link directly to the producing activity because the product is primarily consumed in the same geographical area where it is produced.
- tractor, 4-wheel, agricultural: 0.0668 kg; lognormal variance with pedigree 0.042, pedigree (1,4,5,1,1)
  (same comment as for agricultural machinery, unspecified)

## Emissions to nature
- Ammonia [air, non-urban air or from high stacks]: 1.49e-5 kg; lognormal variance with pedigree 0.0981, pedigree (1,2,5,1,3)
  (same comment as for agricultural machinery, unspecified)
- Benzene [air, non-urban air or from high stacks]: 5.42e-6 kg; lognormal variance with pedigree 0.0981, pedigree (1,2,5,1,3)
  (same comment as for agricultural machinery, unspecified)
- Benzo(a)pyrene [air, non-urban air or from high stacks]: 2.23e-8 kg; lognormal variance with pedigree 0.6981, pedigree (1,2,5,1,3)
  (same comment as for agricultural machinery, unspecified)
- Cadmium II [air, non-urban air or from high stacks]: 7.43e-9 kg; lognormal variance with pedigree 0.6981, pedigree (1,2,5,1,3)
  (same comment as for agricultural machinery, unspecified)
- Carbon dioxide, fossil [air, non-urban air or from high stacks]: 2.31 kg; lognormal variance with pedigree 0.0581, pedigree (1,2,5,1,3)
  (same comment as for agricultural machinery, unspecified)
- Carbon monoxide, fossil [air, non-urban air or from high stacks]: 0.0039 kg; lognormal variance with pedigree 0.692, pedigree (1,4,5,1,1)
  (same comment as for agricultural machinery, unspecified)
- Chromium III [air, non-urban air or from high stacks]: 3.71e-8 kg; lognormal variance with pedigree 0.6981, pedigree (1,2,5,1,3)
  (same comment as for agricultural machinery, unspecified)
- Copper ion [air, non-urban air or from high stacks]: 1.26e-6 kg; lognormal variance with pedigree 0.6981, pedigree (1,2,5,1,3)
  (same comment as for agricultural machinery, unspecified)
- Dinitrogen monoxide [air, non-urban air or from high stacks]: 8.91e-5 kg; lognormal variance with pedigree 0.0981, pedigree (1,2,5,1,3)
  (same comment as for agricultural machinery, unspecified)
- Methane, fossil [air, non-urban air or from high stacks]: 9.58e-5 kg; lognormal variance with pedigree 0.0981, pedigree (1,2,5,1,3)
  (same comment as for agricultural machinery, unspecified)
- NMVOC, non-methane volatile organic compounds [air, non-urban air or from high stacks]: 0.00172 kg; lognormal variance with pedigree 0.082, pedigree (1,4,5,1,1)
  (same comment as for agricultural machinery, unspecified)
- Nickel II [air, non-urban air or from high stacks]: 5.2e-8 kg; lognormal variance with pedigree 0.6981, pedigree (1,2,5,1,3)
  (same comment as for agricultural machinery, unspecified)
- Nitrogen oxides [air, non-urban air or from high stacks]: 0.0308 kg; lognormal variance with pedigree 0.082, pedigree (1,4,5,1,1)
  (same comment as for agricultural machinery, unspecified)
- PAH, polycyclic aromatic hydrocarbons [air, non-urban air or from high stacks]: 2.44e-6 kg; lognormal variance with pedigree 0.3581, pedigree (1,2,5,1,3)
  (same comment as for agricultural machinery, unspecified)
- Particulate Matter, < 2.5 um [air, non-urban air or from high stacks]: 0.00353 kg; lognormal variance with pedigree 0.3581, pedigree (1,2,5,1,3)
  (same comment as for agricultural machinery, unspecified)
- Selenium IV [air, non-urban air or from high stacks]: 7.43e-9 kg; lognormal variance with pedigree 0.0981, pedigree (1,2,5,1,3)
  (same comment as for agricultural machinery, unspecified)
- Sulfur dioxide [air, non-urban air or from high stacks]: 0.000749 kg; lognormal variance with pedigree 0.0581, pedigree (1,2,5,1,3)
  (same comment as for agricultural machinery, unspecified)
- Zinc II [air, non-urban air or from high stacks]: 7.43e-7 kg; lognormal variance with pedigree 0.6981, pedigree (1,2,5,1,3)
  (same comment as for agricultural machinery, unspecified)
- Cadmium II [soil, agricultural]: 3.82e-8 kg; lognormal variance with pedigree 0.082, pedigree (1,4,5,1,1)
  (same comment as for agricultural machinery, unspecified)
- Lead II [soil, agricultural]: 1.71e-7 kg; lognormal variance with pedigree 0.082, pedigree (1,4,5,1,1)
  (same comment as for agricultural machinery, unspecified)
- Zinc II [soil, agricultural]: 9.98e-5 kg; lognormal variance with pedigree 0.082, pedigree (1,4,5,1,1)
  (same comment as for agricultural machinery, unspecified)

## Sampling procedure
The inventoried HC, NOx, CO and fuel consumption values are measurements made following two test cycles (ISO 8178 C1 test and a specific 6-level-test created by the FAT) and on measurements made during the field work. The other emissions were calculated basing on literature data and the measured fuel consumption.

## Extrapolations
Values given in the reference are representative for the chosen work processes. Processes are typical procedures for Switzerland around the year 2000, they are not statistical average processes.

## Review by Roland Hischier 2003-08-06
Passed.

## Review by Roland Hischier 2011-09-28
Transfer of documentation done.
