# potato grading

Dataset: EcoSpold 2, unit process
Geography: CH
Time period: 2002-01-01 to 2022-12-31
Technology level: current
Classification: ISIC rev.4 ecoinvent: 0163:Post-harvest crop activities
Classification: EcoSpold01Categories: agricultural means of production/work processes
Tags: ConvertedDataset
Scenario: Business-as-Usual
System model: Allocation at the point of substitution
Generated by: Thomas Nemecek
Published in: Nemecek, T. 2007
Database: ecoinvent
isCopyrightProtected: true

## General comment
Refers to 1 kg of ungraded potatoes
[This dataset was already contained in the ecoinvent database version 2. It was not individually updated during the transfer to ecoinvent version 3. Life Cycle Impact Assessment results may still have changed, as they are affected by changes in the supply chain, i.e. in other datasets. This dataset was generated following the ecoinvent quality guidelines for version 2. It may have been subject to central changes described in the ecoinvent version 3 change report (http://www.ecoinvent.org/database/ecoinvent-version-3/reports-of-changes/), and the results of the central updates were reviewed extensively. The changes added e.g. consistent water flows and other information throughout the database. The documentation of this dataset can be found in the ecoinvent reports of version 2, which are still available via the ecoinvent website. The change report linked above covers all central changes that were made during the conversion process.]

## Included activities end
Demand on machinery, buildings (shed) and electricity for potato grading and weighting.

## Geography
Values refer to the situation in Switzerland.

## Technology
Uses a potato grader and a weigh.

## Time period
Date of the major data sources.

## Reference product
- potato grading: 1 kg; By-product classification allocatable product; CPC 86111: Post-harvest crop services
  EcoSpold01Location=CH
  production volume 0.0336675 kg
    This is a placeholder value that does not reflect real-world production volumes. This dataset does not currently require a real-world production volume to work in the database framework, and no actual data were collected yet. This has no negative effect on the results of the ecoinvent database. The placeholder value of this activity was scaled according to the nominal GDP of 2005 (source: United Nations, http://data.un.org/Glossary.aspx?q=GDP+%28current+US%24%29, accessed 20130726) to reflect an appropriate share of the global production volume, which is also a placeholder value.
  property price 0.000457916 EUR2005
    Calculated based on inputs: The price of the product has been calculated as a sum of the values of the material and energy inputs for this product. This value is therefore a rough estimation. It may underestimate the real price since there are additional expenses when producing any product. These expences can include for example labour costs, treatment of waste materials and profit for the producer. Please consider carefully whether this level of data quality is acceptable for your application.
  properties: carbon allocation 0 kg, carbon content 0

## Inputs from technosphere
- agricultural machinery, unspecified: 0.000216 kg; lognormal variance with pedigree 0.0406, pedigree (1,3,5,1,1)
  EcoSpold01Location=CH
- electricity, low voltage: 0.00102 kWh; lognormal variance with pedigree 0.0406, pedigree (1,3,5,1,1)
  EcoSpold01Location=CH
- shed: 1.09e-6 m2; lognormal variance with pedigree 0.3406, pedigree (1,3,5,1,1)
  activityLink introduced to establish a direct link to the corresponding regional supply of this product
  EcoSpold01Location=CH

## Sampling procedure
Data based on the yearly published catalog of machine costs in Switzerland (FAT) and on information from machinery experts of the FAT.

## Review by Roland Hischier 2003-08-06
Passed.
