# treatment of waste plastic plaster, sanitary landfill

Dataset: EcoSpold 2, unit process
Geography: CH
Time period: 1994-01-01 to 2022-12-31
Technology level: current
Classification: EcoSpold01Categories: waste management/sanitary landfill
Classification: ISIC rev.4 ecoinvent: 3821:Treatment and disposal of non-hazardous waste
Tags: ConvertedDataset; Treatment
Scenario: Business-as-Usual
System model: Allocation at the point of substitution
Generated by: Gabor Doka (obsolete)
Published in: Doka G. 2007
Database: ecoinvent
isCopyrightProtected: true

## General comment
Inventoried waste contains 4.75% organics in plastic plaster; 95.3% Filler (lime); .
waste composition (wet, in ppm): upper heating value 1.217 MJ/kg; lower heating value 1.209 MJ/kg; H2O n.a.; O 465730; H 3465; C 139890; S n.a.; N n.a.; P n.a.; B n.a.; Cl 9448.8; Br n.a.; F n.a.; I n.a.; Ag n.a.; As 1.4756; Ba n.a.; Cd 12.709; Co 93.76; Cr 42.892; Cu n.a.; Hg 0.028575; Mn n.a.; Mo 20.245; Ni 3.1948; Pb 113.52; Sb n.a.; Se n.a.; Sn 134.25; V n.a.; Zn 80.091; Be n.a.; Sc n.a.; Sr n.a.; Ti n.a.; Tl n.a.; W n.a.; Si n.a.; Fe n.a.; Ca 381000; Al n.a.; K n.a.; Mg n.a.; Na n.a.;
Share of carbon in waste that is biogenic 0%.
Overall degradability of waste during 100 years: 0.04%.
[This dataset was already contained in the ecoinvent database version 2. It was not individually updated during the transfer to ecoinvent version 3. Life Cycle Impact Assessment results may still have changed, as they are affected by changes in the supply chain, i.e. in other datasets. This dataset was generated following the ecoinvent quality guidelines for version 2. It may have been subject to central changes described in the ecoinvent version 3 change report (http://www.ecoinvent.org/database/ecoinvent-version-3/reports-of-changes/), and the results of the central updates were reviewed extensively. The changes added e.g. consistent water flows and other information throughout the database. The documentation of this dataset can be found in the ecoinvent reports of version 2, which are still available via the ecoinvent website. The change report linked above covers all central changes that were made during the conversion process.]

## Included activities end
Waste-specific short-term emissions to air via landfill gas incineration and landfill leachate. Burdens from treatment of short-term leachate (0-100a) in wastewater treatment plant (including WWTP sludge disposal in municipal incinerator). Long-term emissions from landfill to groundwater (after base lining failure).

## Geography
Technology encountered in Switzerland in 2000. Landfill includes base seal, leachate collection system, treatment of leachate in municipal wastewater treatment plant.

## Technology
Swiss municipal sanitary landfill for biogenic or untreated municipal waste ('reactive organic landfill'). Landfill gas and leachate collection system. Recultivation and monitoring for 150 years after closure.

## Reference product
- waste plastic plaster, for final disposal: -1 kg; By-product classification Waste; CPC 39270: Waste, parings and scrap of plastics
  production volume 18 kg
    estimated proportion; source: ecoinvent v2; value to be replaced by value to be calculated from the demand for this treatment activity
  property carbon content, fossil 0.54
    C content was calculated for 1 kg DM, using data in Tab A.4, ecoinvent v2.2 report 13_I.
  property heating value, net 16.36 MJ
    LHV is calculated based on the Carbon content of the product. More details can be found on the respective documentation.
  property price 0 EUR2005
    Waste products are assigned a price of zero as they are assumed to require further treatment.
  properties: carbon allocation 0.54 kg, carbon content 0.54, carbon content, non-fossil 0, dry mass 1 kg, water content 0, water in wet mass 0 kg, wet mass 1 kg

## Inputs from technosphere
- cement, unspecified: 3.28e-8 kg; lognormal variance with pedigree 0.75, pedigree (1,1,5,1,1)
  burden from incineration of sludge from wastewater treatment of the short-term leachate (0-100a). uncertainty is calculated from uncertainties in waste composition and transfer coefficients in incinerator and uncertainty of waste decomposition and short-term leaching in sanitary landfill
  properties: dry mass 1 kg, wet mass 1 kg
- chemical, inorganic: 4.48e-11 kg; lognormal variance with pedigree 1.07, pedigree (1,1,5,1,1)
  (same comment as for cement, unspecified)
  properties: carbon content, fossil 0.003, dry mass 1 kg, wet mass 1 kg
  note on carbon content, fossil: This dataset is an unweighted average of 20 inorganic substances (listed in Tab 88.1, ecoinvent v2.2 report 8, part II), being part of the top100 chemicals included in this database. The C-content has also been calculated as an unweighted average of the C content of the substances composing this dataset.
- chemical, organic: 3.4e-8 kg; lognormal variance with pedigree 1.88, pedigree (1,1,5,1,1)
  (same comment as for cement, unspecified)
  properties: carbon content, fossil 0.628, dry mass 1 kg, heating value, net 19.03 MJ, wet mass 1 kg
  note on carbon content, fossil: This dataset is an unweighted average of 20 organic substances (listed in Tab 88.1, ecoinvent v2.2 report 8, part II), being part of the top100 chemicals included in this database. The C-content has also been calculated as an unweighted average of the C content of the substances composing this dataset.
- electricity, for reuse in municipal waste incineration only: 6.71e-7 kWh; name E_el_prod_MSWI; lognormal variance with pedigree 1.39, pedigree (1,1,5,1,1)
  (same comment as for cement, unspecified)
- electricity, low voltage: 7.45e-5 kWh; lognormal variance with pedigree 0.2106, pedigree (5,5,5,5,5)
  burden from wastewater treatment of the short-term leachate (0-100a). Uncertainty calculated from unertainty of the waste composition of this waste, uncertainty in waste decomposition and short-term leaching in sanitary landfill
- heat, central or small-scale, other than natural gas: 3.2618e-5 MJ; lognormal variance with pedigree 0.2106, pedigree (5,5,5,5,5)
  (same comment as for electricity, low voltage)
  properties: heating value, net 1 MJ
- heat, district or industrial, natural gas: 4.5024e-5 MJ; lognormal variance with pedigree 0.2106, pedigree (5,5,5,5,5)
  (same comment as for electricity, low voltage)
  properties: heating value, net 1 MJ
- heat, for reuse in municipal waste incineration only: 3.91e-6 MJ; name E_th_prod_MSWI; lognormal variance with pedigree 0.98, pedigree (1,1,5,1,1)
  (same comment as for cement, unspecified)
- hydrochloric acid, without water, in 30% solution state: 2.69e-11 kg; lognormal variance with pedigree 1.07, pedigree (1,1,5,1,1)
  (same comment as for cement, unspecified)
  properties: dry mass 1 kg, heating value, net 3.32 MJ, wet mass 1 kg
- iron (III) chloride, without water, in 40% solution state: 8.16e-9 kg; lognormal variance with pedigree 1.07, pedigree (1,1,5,1,1)
  (same comment as for cement, unspecified)
  properties: dry mass 1 kg, wet mass 1 kg
- municipal waste incineration facility: 1.17e-15 unit; lognormal variance with pedigree 0.98, pedigree (1,1,5,1,1)
  Burden from incineration of sludge from wastewater treatment of the short-term leachate (0-100a).
  Burden from incineration of sludge from wastewater treatment of the short-term leachate (0-100a).
- process-specific burdens, municipal waste incineration: 4.66e-6 kg; lognormal variance with pedigree 0.98, pedigree (1,1,5,1,1)
  Burden from incineration of sludge from wastewater treatment of the short-term leachate (0-100a).
  Burden from incineration of sludge from wastewater treatment of the short-term leachate (0-100a).;activityLink introduced to establish a direct link to the corresponding regional supply of this product
- process-specific burdens, residual material landfill: 8.2e-8 kg; lognormal variance with pedigree 0.75, pedigree (1,1,5,1,1)
  burden from incineration of sludge from wastewater treatment of the short-term leachate (0-100a). uncertainty is calculated from uncertainties in waste composition and transfer coefficients in incinerator and uncertainty of waste decomposition and short-term leaching in sanitary landfill;activityLink introduced to establish a direct link to the corresponding regional supply of this product
- process-specific burdens, sanitary landfill: 1 kg; lognormal variance with pedigree 0.04, pedigree (1,1,5,1,1)
  demands per kilogram waste. uncertainty is heeded in the module;activityLink introduced to establish a direct link to the corresponding regional supply of this product
- process-specific burdens, slag landfill: 1.88e-7 kg; lognormal variance with pedigree 1.29, pedigree (1,1,5,1,1)
  (same comment as for process-specific burdens, residual material landfill)
- residual material landfill: 1.71e-16 unit; lognormal variance with pedigree 0.75, pedigree (1,1,5,1,1)
  (same comment as for cement, unspecified)
- sanitary landfill facility: 5.56e-10 unit; lognormal variance with pedigree 0.04, pedigree (1,1,5,1,1)
  demands per kilogram waste. uncertainty is heeded in the module
  This exchange has an activity link directly to the producing activity because the product is primarily consumed in the same geographical area where it is produced.
- sewer grid, 5E9l/year, 110 km: 5.45e-10 km; lognormal variance with pedigree 0.2106, pedigree (5,5,5,5,5)
  (same comment as for electricity, low voltage)
- slag landfill: 3.34e-16 unit; lognormal variance with pedigree 1.29, pedigree (1,1,5,1,1)
  (same comment as for cement, unspecified)
- waste cement, hydrated: -8.2e-8 kg; lognormal variance with pedigree 0.71, pedigree (1,1,1,1,1)
  (same comment as for cement, unspecified)
  production volume
    Calculated from the production volume of waste plastic plaster, 0% water, final disposal in proportion to the respective output amounts.
  properties: dry mass 1 kg, wet mass 1 kg
- waste graphical paper: -3.88e-5 kg; lognormal variance with pedigree 0.2106, pedigree (5,5,5,5,5)
  (same comment as for electricity, low voltage)
  production volume
    (same comment as for waste cement, hydrated)
  properties: carbon content, non-fossil 0.454955, dry mass 0.888 kg, heating value, net 14.12 MJ, water content 0.126126, wet mass 1 kg
  note on heating value, net: Value taken from the general comment of the treatment dataset.
- waste plastic, mixture: -3.88e-5 kg; lognormal variance with pedigree 0.2106, pedigree (5,5,5,5,5)
  (same comment as for electricity, low voltage)
  production volume
    (same comment as for waste cement, hydrated)
  properties: carbon content, fossil 0.747344, dry mass 0.847 kg, heating value, net 30.79 MJ, water content 0.180638, wet mass 1 kg
  note on carbon content, fossil: C content in 1 kg DM was calculated using data in Tab A.2, ecoinvent v2.2 report 13_I
- wastewater treatment facility, capacity 5E9l/year: 1.42e-11 unit; lognormal variance with pedigree 0.2106, pedigree (5,5,5,5,5)
  (same comment as for electricity, low voltage)

## Emissions to nature
- Cadmium II [air, non-urban air or from high stacks]: 1.48e-10 kg; lognormal variance with pedigree 2.52, pedigree (1,1,5,1,1)
  burden from direct release or incineration of landfill biogas. Uncertainty calculated from unertainty of the waste composition of this waste, uncertainty in waste decomposition and short-term leaching in sanitary landfill
- Cadmium II [air, urban air close to ground]: 6.09e-13 kg; lognormal variance with pedigree 1.92, pedigree (1,1,5,1,1)
  Emissions from short-term leachate treatment and incineration of resulting sludge. Uncertainty calculated depending on waste input and uncertainty of transfer coefficents in landfill, wastewater treatment and incineration model.
- Carbon dioxide, fossil [air, non-urban air or from high stacks]: 0.000641 kg; lognormal variance with pedigree 0.71, pedigree (1,1,5,1,1)
  (same comment as for Cadmium II)
- Carbon dioxide, fossil [air, urban air close to ground]: 2.14e-5 kg; lognormal variance with pedigree 1.17, pedigree (1,1,5,1,1)
  (same comment as for Cadmium II)
- Carbon monoxide, fossil [air, non-urban air or from high stacks]: 3.63e-8 kg; lognormal variance with pedigree 1.36, pedigree (1,1,5,1,1)
  (same comment as for Cadmium II)
- Carbon monoxide, fossil [air, urban air close to ground]: 1.38e-8 kg; lognormal variance with pedigree 1.23, pedigree (1,1,5,1,1)
  (same comment as for Cadmium II)
- Chromium III [air, non-urban air or from high stacks]: 1.1e-12 kg; lognormal variance with pedigree 3.14, pedigree (1,1,5,1,1)
  (same comment as for Cadmium II)
- Chromium III [air, urban air close to ground]: 1.61e-16 kg; lognormal variance with pedigree 2.18, pedigree (1,1,5,1,1)
  (same comment as for Cadmium II)
- Cobalt II [air, non-urban air or from high stacks]: 7.53e-11 kg; lognormal variance with pedigree 2.6, pedigree (1,1,5,1,1)
  (same comment as for Cadmium II)
- Cobalt II [air, urban air close to ground]: 4.71e-15 kg; lognormal variance with pedigree 1.63, pedigree (1,1,5,1,1)
  (same comment as for Cadmium II)
- Hydrochloric acid [air, non-urban air or from high stacks]: 3.43e-6 kg; lognormal variance with pedigree 1.2, pedigree (1,1,5,1,1)
  (same comment as for Cadmium II)
- Lead II [air, non-urban air or from high stacks]: 2.19e-12 kg; lognormal variance with pedigree 3.04, pedigree (1,1,5,1,1)
  (same comment as for Cadmium II)
- Lead II [air, urban air close to ground]: 2.17e-13 kg; lognormal variance with pedigree 2.07, pedigree (1,1,5,1,1)
  (same comment as for Cadmium II)
- Methane, fossil [air, non-urban air or from high stacks]: 9.82e-5 kg; lognormal variance with pedigree 0.76, pedigree (1,1,5,1,1)
  (same comment as for Cadmium II)
- Methane, fossil [air, urban air close to ground]: 4.19e-8 kg; lognormal variance with pedigree 1.23, pedigree (1,1,5,1,1)
  (same comment as for Cadmium II)
- Molybdenum VI [air, non-urban air or from high stacks]: 5.34e-12 kg; lognormal variance with pedigree 2.94, pedigree (1,1,5,1,1)
  (same comment as for Cadmium II)
- Molybdenum VI [air, urban air close to ground]: 2.1e-11 kg; lognormal variance with pedigree 1.9, pedigree (1,1,5,1,1)
  (same comment as for Cadmium II)
- NMVOC, non-methane volatile organic compounds [air, non-urban air or from high stacks]: 6.87e-10 kg; lognormal variance with pedigree 0.76, pedigree (1,1,5,1,1)
  (same comment as for Cadmium II)
- NMVOC, non-methane volatile organic compounds [air, urban air close to ground]: 1.9e-10 kg; lognormal variance with pedigree 1.34, pedigree (1,1,5,1,1)
  (same comment as for Cadmium II)
- Particulate Matter, < 2.5 um [air, non-urban air or from high stacks]: 1.22e-8 kg; lognormal variance with pedigree 1.02, pedigree (1,1,5,1,1)
  (same comment as for Cadmium II)
- Tin ion [air, non-urban air or from high stacks]: 1.98e-12 kg; lognormal variance with pedigree 3.05, pedigree (1,1,5,1,1)
  (same comment as for Cadmium II)
- Tin ion [air, urban air close to ground]: 6.1e-12 kg; lognormal variance with pedigree 2.03, pedigree (1,1,5,1,1)
  (same comment as for Cadmium II)
- Zinc II [air, non-urban air or from high stacks]: 6.13e-12 kg; lognormal variance with pedigree 2.92, pedigree (1,1,5,1,1)
  (same comment as for Cadmium II)
- Zinc II [air, urban air close to ground]: 3.11e-13 kg; lognormal variance with pedigree 1.89, pedigree (1,1,5,1,1)
  (same comment as for Cadmium II)
- Arsenic ion [water, ground-, long-term]: 1.48e-6 kg; lognormal variance with pedigree 1.56, pedigree (1,1,5,1,1)
  Emissions from long-term leachate (>100a) directly from MSW landfill and indirectly via incineration of treatement sludge from leachate treatement. Uncertainty calculated depending on waste input and uncertainty of long-term transfer coefficents in landfill.
- BOD5, Biological Oxygen Demand [water, ground-, long-term]: 0.00927 kg; lognormal variance with pedigree 0.6, pedigree (1,1,5,1,1)
  (same comment as for Arsenic ion)
- BOD5, Biological Oxygen Demand [water, surface water]: 1.48e-6 kg; lognormal variance with pedigree 1.18, pedigree (1,1,5,1,1)
  (same comment as for Cadmium II)
- COD, Chemical Oxygen Demand [water, ground-, long-term]: 0.0392 kg; lognormal variance with pedigree 0.6, pedigree (1,1,5,1,1)
  (same comment as for Arsenic ion)
- COD, Chemical Oxygen Demand [water, surface water]: 4.7e-6 kg; lognormal variance with pedigree 1.17, pedigree (1,1,5,1,1)
  (same comment as for Cadmium II)
- Cadmium II [water, ground-, long-term]: 1.27e-5 kg; lognormal variance with pedigree 1.28, pedigree (1,1,5,1,1)
  (same comment as for Arsenic ion)
- Cadmium II [water, surface water]: 1.13e-8 kg; lognormal variance with pedigree 1.86, pedigree (1,1,5,1,1)
  (same comment as for Cadmium II)
- Calcium II [water, ground-, long-term]: 0.381 kg; lognormal variance with pedigree 0.07, pedigree (1,1,5,1,1)
  (same comment as for Arsenic ion)
- Chloride [water, ground-, long-term]: 0.00921 kg; lognormal variance with pedigree 0.41, pedigree (1,1,5,1,1)
  (same comment as for Arsenic ion)
- Chloride [water, surface water]: 0.000238 kg; lognormal variance with pedigree 0.67, pedigree (1,1,5,1,1)
  Emissions from short-term leachate treatment. Uncertainty calculated depending on waste input and uncertainty of transfer coefficents in landfill and wastewater treatment.
- Chromium III [water, surface water]: 6.93e-12 kg; lognormal variance with pedigree 2.1, pedigree (1,1,5,1,1)
  (same comment as for Cadmium II)
- Chromium VI [water, ground-, long-term]: 1.94e-7 kg; lognormal variance with pedigree 8.39, pedigree (1,1,5,1,1)
  (same comment as for Arsenic ion)
- Chromium VI [water, surface water]: 2.31e-9 kg; lognormal variance with pedigree 2.06, pedigree (1,1,5,1,1)
  (same comment as for Cadmium II)
- Cobalt II [water, ground-, long-term]: 9.36e-5 kg; lognormal variance with pedigree 1.01, pedigree (1,1,5,1,1)
  (same comment as for Arsenic ion)
- Cobalt II [water, surface water]: 1.53e-7 kg; lognormal variance with pedigree 1.51, pedigree (1,1,5,1,1)
  (same comment as for Cadmium II)
- DOC, Dissolved Organic Carbon [water, ground-, long-term]: 0.0358 kg; lognormal variance with pedigree 0.6, pedigree (1,1,5,1,1)
  (same comment as for Arsenic ion)
- DOC, Dissolved Organic Carbon [water, surface water]: 1.14e-6 kg; lognormal variance with pedigree 1.18, pedigree (1,1,5,1,1)
  (same comment as for Cadmium II)
- Lead II [water, ground-, long-term]: 0.000114 kg; lognormal variance with pedigree 0.99, pedigree (1,1,5,1,1)
  (same comment as for Arsenic ion)
- Lead II [water, surface water]: 7.21e-10 kg; lognormal variance with pedigree 2.02, pedigree (1,1,5,1,1)
  (same comment as for Cadmium II)
- Mercury II [water, ground-, long-term]: 2.86e-8 kg; lognormal variance with pedigree 1.96, pedigree (1,1,5,1,1)
  (same comment as for Arsenic ion)
- Molybdenum VI [water, ground-, long-term]: 8e-6 kg; lognormal variance with pedigree 1.43, pedigree (1,1,5,1,1)
  (same comment as for Arsenic ion)
- Molybdenum VI [water, surface water]: 1.26e-8 kg; lognormal variance with pedigree 1.86, pedigree (1,1,5,1,1)
  (same comment as for Cadmium II)
- Nickel II [water, ground-, long-term]: 3.19e-6 kg; lognormal variance with pedigree 1.46, pedigree (1,1,5,1,1)
  (same comment as for Arsenic ion)
- TOC, Total Organic Carbon [water, ground-, long-term]: 0.0358 kg; lognormal variance with pedigree 0.6, pedigree (1,1,5,1,1)
  (same comment as for Arsenic ion)
- TOC, Total Organic Carbon [water, surface water]: 1.19e-6 kg; lognormal variance with pedigree 1.17, pedigree (1,1,5,1,1)
  (same comment as for Cadmium II)
- Tin ion [water, ground-, long-term]: 0.000134 kg; lognormal variance with pedigree 0.96, pedigree (1,1,5,1,1)
  (same comment as for Arsenic ion)
- Tin ion [water, surface water]: 3.31e-9 kg; lognormal variance with pedigree 1.99, pedigree (1,1,5,1,1)
  (same comment as for Cadmium II)
- Zinc II [water, ground-, long-term]: 6.61e-5 kg; lognormal variance with pedigree 1.04, pedigree (1,1,5,1,1)
  (same comment as for Arsenic ion)
- Zinc II [water, surface water]: 8.53e-9 kg; lognormal variance with pedigree 1.83, pedigree (1,1,5,1,1)
  (same comment as for Cadmium II)

## Sampling procedure
Landfill model based on observed leachate concentrations in literature. Extrapolated to 60'000 years heeding chemical characteristics. Initial waste composition from various literature sources.

## Review by Niels Jungbluth 2003-07-21
Passed. Calculation for standard deviation 95 of, i.e., infrastructure,
land occupation, transport services or other services can differ from
standard Pedigree approach used in this project and figures obtained by
this procedure.
