# cement production, CEM V/B

Dataset: EcoSpold 2, unit process
Geography: CH
Time period: 2005-01-01 to 2022-12-31
Technology level: current
Classification: ISIC rev.4 ecoinvent: 2394:Manufacture of cement, lime and plaster
Synonyms: CEM V/B; Composite cement
Tags: combined production
Scenario: Business-as-Usual
System model: Allocation at the point of substitution
Share of production covered: 100 %
Generated by: Michael Elias Boesch
Published in: Boesch, M.E. 2010
Database: ecoinvent
isCopyrightProtected: true

## General comment
The dataset describes the production of cement (CEM V/B) in Switzerland.

## Included activities start
From cradle, i.e. including all upstream activities. As source of gypsum, waste gypsum from flue gas treatment is assumed.

## Included activities end
This activity ends with the cement produced in the cement mill. The dataset does not include packaging and administration.

## Reference product
- cement, CEM V/B: 1 kg; name cement; source Boesch, M.E. 2010; By-product classification allocatable product; CPC 37440: Portland cement, aluminous cement, slag cement and similar hydraulic cements, except in the form of clinkers
  Literature Value
  production volume 3.68375e7 kg
    Total production volume of hydraulic cement in Switzerland in 2019: 4'210'000 ton. Source: USGS (2019). U.S. Geological Survey, Minerals Yearbook Annual Tables, 2019. Available at: https://www.usgs.gov/centers/national-minerals-information-center/cement-statistics-and-information
    According to cemsuisse (2021), domestic delivery of cement type ‘others’ in Switzerland in 2020 had a share of 3.5%. This value was equally distributed between CEM IV/A, CEM IV/B, CEM V/A and CEM V/B, following the initial shares from the data provider. Source: cemsuisse Kennzahlen 2021. Available at: <https://www.cemsuisse.ch/app/uploads/2021/05/Download-Kennzahlen-A5-dt.pdf>
  property price 0.0615 EUR2005
    2005 import and export prices (total trades (USD) divided by total weight (kg) in China, India, USA, Japan, Russia and Europe, major producers and consumers (http://www.cementchina.net/freport/showfre.asp?id=749) from UN Commodity Trade Statistics Database (http://data.un.org/Explorer.aspxDatabase [Accessed 2 July 2010]). Commodity: Cement (portland, aluminious, slag or hydraulic)
  properties: carbon allocation 0 kg, carbon content 0, carbon content, fossil 0, carbon content, non-fossil 0, dry mass 1 kg, water content 0, water in wet mass 0 kg, wet mass 1 kg

## Inputs from technosphere
- burnt shale: 0.0061 kg; name bshale; = 0.0061*cement; lognormal variance with pedigree 0.006, pedigree (1,1,1,1,1)
  Literature Value
  properties: dry mass 1 kg, wet mass 1 kg
- cement factory: 5.36e-11 unit; = 5.36e-11* cement; source Kellenberger D. 2007; lognormal variance with pedigree 0.3026, pedigree (2,1,3,1,1)
  Literature Value This exchange has an activity link directly to the producing activity because the product is primarily consumed in the same geographical area where it is produced.
- clinker: 0.375 kg; = 0.375* cement; source Boesch, M.E. 2010; lognormal variance with pedigree 0.0053, pedigree (3,3,3,3,1)
  Literature Value
  properties: dry mass 1 kg, wet mass 1 kg
- electricity, medium voltage: 0.0382 kWh; = 0.0382* cement; source Boesch, M.E. 2010; lognormal variance with pedigree 0.0053, pedigree (3,3,3,3,1)
  Literature Value
- ethylene glycol: 0.00031 kg; = 3.1e-4* cement; source Kellenberger D. 2007; lognormal variance with pedigree 0.0053, pedigree (3,3,3,3,1)
  Ancillary product for grinding
  properties: carbon content, fossil 0.387097, dry mass 1 kg, heating value, net 23.44 MJ, wet mass 1 kg
- ground granulated blast furnace slag: 0.305 kg; name GGBFS; = 0.305* cement; source Boesch, M.E. 2010; lognormal variance with pedigree 0.0053, pedigree (3,3,3,3,1)
  Literature Value
  properties: dry mass 1 kg, wet mass 1 kg
- gypsum, mineral: 0.0195 kg; = 0.0195* cement; source Boesch, M.E. 2010; lognormal variance with pedigree 0.0053, pedigree (3,3,3,3,1)
  Literature Value
  properties: dry mass 1 kg, wet mass 1 kg
- heat, district or industrial, other than natural gas: 0.0976 MJ; = 0.32*ABS(GGBFS); source Boesch, M.E. 2010; lognormal variance with pedigree 0.0006, pedigree (1,1,1,1,1)
  Heat for drying of blast furnace slag. Literature Value
  property corresponding fuel use, propane, furnace >100kW 0 MJ; name fuel_use
  properties: heating value, net 1 MJ
  note on corresponding fuel use, propane, furnace >100kW: Lower heating value of the fuel input related to the heat/electricity output, taken directly from ecoinvent v3.0 dataset "heat production, natural gas, at industrial furnace >100kW, GLO 2000".
- limestone, crushed, for mill: 0.2593 kg; name limestone; = 0.2593*cement; source Boesch, M.E. 2010; lognormal variance with pedigree 0.0053, pedigree (3,3,3,3,1)
  Literature Value
  properties: carbon content, fossil 0.117492, dry mass 0.998 kg, water content 0.00200401, wet mass 1 kg
- steel, low-alloyed: 0.00011 kg; name steel; = 0.00011* cement; source Kellenberger D. 2007; lognormal variance with pedigree 0.0053, pedigree (3,3,3,3,1)
  Literature value
  properties: carbon content, fossil 0.005, dry mass 1 kg, wet mass 1 kg

## Emissions to nature
- Heat, waste [air, unspecified]: 0.138 MJ; = 0.138* cement; source Boesch, M.E. 2010; lognormal variance with pedigree 0.0447, pedigree (3,3,3,3,1)
  Literature Value

## Sampling procedure
Data approximates average Swiss production

## Extrapolations
based on EU values
