# treatment of sewage sludge, 97% water, WWT, WW from GGBFS production, landfarming

Dataset: EcoSpold 2, unit process
Geography: RoW
Time period: 2000-01-01 to 2022-12-31
Technology level: current
Classification: ISIC rev.4 ecoinvent: 3821:Treatment and disposal of non-hazardous waste
Scenario: Business-as-Usual
System model: Allocation at the point of substitution
Generated by: Nikolia Stoikou
Database: ecoinvent
isCopyrightProtected: true

## General comment
The process represents the treatment of a waste (sewage sludge) that is exclusively produced from another waste treatment. Recommended use of this dataset: to be used within the specific chain of treatments for 'wastewater from GGBFS production'. Share of biogenic carbon in the sludge: 0%. "GGBFS" stands for "Ground granulated blast furnace slag".

## Included activities start
The activity starts with the waste being available for landfarming. Collection and transportation of the waste to this process is not included.

## Included activities end
The activity ends with the waste being treated and waste-specific emissions from the landfarming process are released to the environment (air, water and soil). The activity is considering local fate of emissions and the initial specific wastewater composition (generating the sewage sludge). Further, it includes provision of fertiliser functions for N, P, K, if present in the sludge.

## Geography
The site has mean annual temperature (MAT) of 16.743579766537 degC, mean annual precipitation (MAP) of 1250.84108527132 mm/year, mean annual actual evaporation (EAT) of 460.58904958214 mm/year. Climate will influence the local fate emissions based on the elemental composition of the sludge as well as water evaporation to air (= consumptive water use).
References: UN data, 2020. Precipitation, Environment Statistics Database, United Nations Statistics Division Available at: http://data.un.org/Data.aspx?q=precipitation&d=ENV&f=variableID%3a6;
World Bank, 2022. Surface area (sq.km), World Bank Group Available at: https://data.worldbank.org/indicator/AG.SRF.TOTL.K2;
Doka G.,2021. A model for composition-specific life cycle inventories of regionalised wastewater fates, Zurich, Switzerland. http://www.doka.ch/publications.htm

## Technology
Landfarming is the process of spreading a substrate on agricultural soil. Sewage sludge is generated in the wastewater treatment of wastewater from GGBFS production. Spreading of liquid sewage sludge (97w% water content) on agricultural fields with mobile vacuum tanker.

## Reference product
- organic nitrogen fertiliser, as N: 1 kg; By-product classification allocatable product; CPC 34659: Fertilizers n.e.c.
  gross fertilizer function provided from sewage sludge spreading on agricultural fields.
  production volume 767.999 kg
    Calculated in proportion to wastewater reference product.
  property nitrogen content 1
    Nitrogen content (on a dry matter basis) of organic nitrogen fertiliser, as N is calculated from the molecular formula of the substance (Nitrogen).
  property price 0.473 EUR2005
    Set equal to the price of the corresponding inorganic fertiliser
  properties: carbon allocation 0 kg, carbon content 0, carbon content, fossil 0, carbon content, non-fossil 0, dry mass 1 kg, water content 0, water in wet mass 0 kg, wet mass 1 kg

## Inputs from technosphere
- blast furnace: 2.5041e-11 unit
- blast furnace dust: -0.00158091, -0.0160749 kg (2 suppliers, which the file names only by identifier); sum of these -0.0176558 kg
- blast furnace gas: -0.532142 MJ
- blast furnace slag: -0.532177 kg
- blast furnace sludge: -0.000347424, -0.000203206, -0.0055989, -0.00196181 kg (4 suppliers, which the file names only by identifier); sum of these -0.00811134 kg
- coke: 18.6676 MJ
- diesel: 7.34801e-7 kg
- dolomite: 0.000362656 kg
- electricity, medium voltage: 5.39499e-6 kWh
- hard coal: 1.96181e-10, 0.0392668, 0.0178049, 0.0235783, 0.12601, 0.0181695, 0.0265451, 0.00772678, 0.00422498 kg (9 suppliers, which the file names only by identifier); sum of these 0.263326 kg
- heat, district or industrial, other than natural gas: 0.00692766 MJ
- inert waste, for final disposal: -0.000209126, -0.00212642 kg (2 suppliers, which the file names only by identifier); sum of these -0.00233555 kg
- iron ore concentrate: 0.263326, 0.0372622 kg (2 suppliers, which the file names only by identifier); sum of these 0.300588 kg
- iron pellet: 0.0485549, 0.702203 kg (2 suppliers, which the file names only by identifier); sum of these 0.750757 kg
- iron sinter: 0.112804, 1.67823, 0.165048 kg (3 suppliers, which the file names only by identifier); sum of these 1.95609 kg
- limestone, unprocessed: 0.000327378, 0.00157188, 0.0159832 kg (3 suppliers, which the file names only by identifier); sum of these 0.0178824 kg
- natural gas, high pressure: 4.05228e-5, 1.71048e-5, 9.79638e-5, 2.9072e-5, 0.00164462, 0.000168093, 1.83488e-5, 5.41446e-7, 6.51537e-5, 6.84192e-5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 m3 (26 suppliers, which the file names only by identifier); sum of these 0.00540156 m3
- nitrogen, liquid: 0.0038378 kg
- oxygen, liquid: 0.00655982 kg
- refractory, fireclay, packed: 0.00351101 kg
- sponge iron: 4.29147e-7 kg
- steam, in chemical industry: 0.0177789 kg
- wastewater from pig iron production: -0.000266847, -4.68755e-7, -1.86521e-5 m3 (3 suppliers, which the file names only by identifier); sum of these -0.000285967 m3

## Inputs from nature
- Water, cooling, unspecified natural origin [natural resource, in water]: 0.00185553 m3
- Water, unspecified natural origin [natural resource, in ground]: 9.05279e-5 m3
- Water, unspecified natural origin [natural resource, in water]: 0.000708474 m3

## Emissions to nature
- Carbon dioxide, fossil [air, unspecified]: 1.51539 kg
- Carbon monoxide, fossil [air, unspecified]: 0.00251743 kg
- Dioxins, measured as 2,3,7,8-tetrachlorodibenzo-p-dioxin [air, unspecified]: 4.99505e-15 kg
- Hydrogen sulfide [air, unspecified]: 2.01804e-5 kg
- Lead II [air, unspecified]: 1.2987e-7 kg
- Manganese II [air, unspecified]: 1.3986e-7 kg
- Nickel II [air, unspecified]: 2.99692e-8 kg
- Nitrogen oxides [air, unspecified]: 0.00014985 kg
- Particulate Matter, < 2.5 um [air, unspecified]: 5.39452e-5 kg
- Particulate Matter, > 10 um [air, unspecified]: 2.99692e-6 kg
- Particulate Matter, > 2.5 um and < 10um [air, unspecified]: 2.99692e-6 kg
- Sulfur dioxide [air, unspecified]: 0.000249752 kg
- Water [air, unspecified]: 0.000878817 m3
- Water [water, unspecified]: 0.00170329 m3
