# protein pea production

Dataset: EcoSpold 2, unit process
Geography: CA-SK
Time period: 2017-01-01 to 2022-12-31
Technology level: current
Classification: ISIC rev.4 ecoinvent: 0111:Growing of cereals (except rice), leguminous crops and oil seeds
Synonyms: field pea (Canada)
Scenario: Business-as-Usual
System model: Allocation at the point of substitution
Generated by: Davoud Heidari
Published in: Food Systems PRISM Lab 2020
Database: ecoinvent
isCopyrightProtected: true

## General comment
This dataset represents the production of 1 tonne of dried pea product with a dry matter of 84% at minimum during May-August, 2019, at 25813.30 ha pea farms located in the Province of Saskatchewan, Canada. Farms have yield of 3017.67 kg dried matter per ha for this crop cycle. The system boundaries include the production of all of crop inputs (e.g. seeds, fertilizers, crop protection products, and fuel). There is an estimated 0.615 kg of N fixation per tonne of peas produced in this region that can be included as an avoided use of N fertilizer for the next crop in the rotation. However, this was not included in this model due to data presentation restrictions. Irrigation is not included since it is rarely performed for peas in this region. Sowing date for the crop is May, 2019 and harvesting date is August, 2020. Seeding rate is 0.08 kg/tonne of pea production. Fertilizer applied contain nitrogen (as N) 3.53 kg/tonne, phosphate (as P2O5) 11.85 kg/tonne, potash (as K2O) 1.01 kg/tonne, sulfur (as S) 1.28 kg/tonne, and zinc (as Zn) 0.02 kg/tonne. Predominant crop protection applied contain active ingredients of Glyphosate 369.5 g/tonne, Bentazon 178.16 g/tonne, and Imazamox 7.75 g/tonne. Machinery is used for tillage (disk), land rolling, seeding, tillage (cultivator), swathing, harrowing, fertilizer application, in-crop herbicide application, foliar fungicide application, foliar insecticide application, combining, post-harvest herbicide application, and burndown/desiccant application with total fuel consumption of 46.54 kg/tonne.

## Included activities start
Starting inputs for this activity include seed, fertilizer, crop protection products and fuel on the farm. This activity begins with soil preparation about 37 weeks after the harvest of the previous crop. The soil is prepared for cultivation in 1st week of May and sowing of seeds started about 5 days after soil preparation.

## Included activities end
This activity ends with pea drying to <16% moisture at farm gate. Carbon and nitrogen emissions associated with above- and below-ground biomass are accounted for using the DNDC model. This model was also used to calculate a nitrogen fixation credit that can be included as an avoided use of N fertilizer for the next crop in the rotation. However, this was not included in this model due to data presentation restrictions. For peas in this region, the N credit was estimated to be 0.615 kg/t.

## Geography
Refers to weighted-average production in the Province of Saskatchewan, Canada

## Technology
Production of pea includes farm practices from tillage (disk), land rolling, seeding, tillage (cultivator), swathing, harrowing, fertilizer application, in-crop herbicide application, foliar fungicide application, foliar insecticide application, combining, post-harvest herbicide application, burndown/desiccant application, to drying.

## Time period
Soil cultivating date for the main crop: April - May 2019; Harvesting date main crop: August, 2017-2019. The soil cultivation, sowing and harvesting dates are the data collected by the farmers. Total time from date of sowing to date of harvesting comes to 119 days. The data is collected for three crop cycles. The cycle of one year is considered for entry in ecoinvent.

## Parameters
- LUC_crop_specific: 1 dimensionless
- yield kgha: 3017.67 kg/ha

## Reference product
- protein pea: 1 kg; name REF_PRODUCT; By-product classification allocatable product; CPC 0124: Green leguminous vegetables
  production volume 77895.9 kg
    Production volume for dry pea is provided in kg. Data is for the year 2017-2019.
  property carbon content, non-fossil 0.469421; name REF_PRODUCT_C_content_non_fossil
    biogene carbon content on a dry matter basis
    Composition data obtained from Peas, split, mature seeds, raw, in (http://www.nal.usda.gov/fnic/foodcomp/search/). First, composition data were refered to 1 kg dry mass. Then, C-contents were calculated considering a C-content/dry mass of 46% in carbohydrates (including fibres), 53% in proteins and 75% in fats. All data from 'Evolutionary and Biochemical Aspects', A.D. Kay and T. Vrede (in Global Ecology, 2010, Elsevier B.V., S.E. Jørgensen Ed.).
  property energy content 16.0776 MJ; name REF_PRODUCT_energy_content
    See chapter 'Product Properties' in '01_crop production - yields & inputs CH & Europe_v1.0.pdf', section 'AGRICULTURAL PRODUCTION IN SWITZERLAND' - pdf-document on the dedicated talk page of ecoinvent (www.ecoinvent.org/documentation)
  property price 2.11 EUR2005
    Calculated value based on data from United Nations Commodity Trade Statistics Database (comtrade.un.org). UN comtrade category: 210610 Protein concentrates and textures protein substances. Year 2005. Using exchange rate of 1EURO = 1.209 USD. Average of price of import into 5 main markets (EU, US, JP, IN and CN).
  properties: carbon allocation 0.408396 kg, carbon content 0.469421, carbon content, fossil 0, dry mass 0.87 kg, water content 0.149425, water in wet mass 0.13 kg, wet mass 1 kg

## Inputs from technosphere
- ammonium nitrate: 6.35826e-5 kg; lognormal variance with pedigree 0.002, pedigree (2,3,2,1,1)
  This refers to production of Ammonium nitrate (as N).
  Uncertainty: D
  properties: dry mass 1 kg, wet mass 1 kg
- ammonium sulfate: 0.00026525 kg; lognormal variance with pedigree 0.002, pedigree (2,3,2,1,1)
  This refers to production of Ammonium sulphate (as N), and Ammonium thiosulphate (as N).
  Uncertainty: D
  properties: dry mass 1 kg, wet mass 1 kg
- application of plant protection product, by field sprayer: 0.000164343 ha; lognormal variance with pedigree 0.0008, pedigree (1,1,2,1,1)
  This refers to application of plant protection product, by field sprayer.
- combine harvesting: 4.81605e-5 ha; lognormal variance with pedigree 0.0008, pedigree (1,1,2,1,1)
  This refers to combine harvesting.
- drying of protein pea: 0.025 l; lognormal variance with pedigree 0.0008, pedigree (1,1,2,1,1)
  This refers to drying of peas.
- fertilising, by broadcaster: 0.000103643 ha; lognormal variance with pedigree 0.0008, pedigree (1,1,2,1,1)
  This refers to fertilising, by broadcaster.
- glyphosate: 0.0003695 kg; lognormal variance with pedigree 0.0014, pedigree (1,3,2,1,1)
  This refers to production of glyphosate.
  Uncertainty: D
  properties: carbon content, fossil 0.214286, dry mass 1 kg, wet mass 1 kg
- monoammonium phosphate: 0.0148471 kg; lognormal variance with pedigree 0.002, pedigree (2,3,2,1,1)
  This refers to production of 0.28 (as N), 40 Rock (as N), Ammonium Polyphosphate (liquid) (as N), In-furrow liquid starter (as N), MIcroEssentials S10 (as N), MicroEssentials S15 (as N), MicroEssentials SZ (as N), Monoammonium Phosphate (MAP) (as N), 40 Rock (as P2O5), Ammonium Polyphosphate (liquid) (as P2O5), In-furrow liquid starter (as P2O5), MIcroEssentials S10 (as P2O5), MicroEssentials S15 (as P2O5), MicroEssentials SZ (as P2O5), and Monoammonium Phosphate (MAP) (as P2O5).
  Uncertainty: D
  properties: dry mass 1 kg, nitrogen content 0.084, phosphorus content 0.226939, wet mass 1 kg
  note on nitrogen content: Nitrogen content (on a dry matter basis) of monoammonium phosphate is calculated from the molecular formula of the nutrient present in the substance.
  note on phosphorus content: Phosphorus content (on a dry matter basis) of monoammonium phosphate is calculated from the molecular formula of the nutrient present in the substance.
- pea seed, for sowing: 7.52e-5 kg; lognormal variance with pedigree 0.002, pedigree (2,3,2,1,1)
  This refers to production of pea seed.
  Uncertainty: D
  properties: carbon content, non-fossil 0.469421, dry mass 0.87 kg, water content 0.149425, wet mass 1 kg
- peat moss: 5.3995e-6 m3; = 0.001117697/207
  Peat moss is used as a proxy to model the used inoculum. The amount is calculated by dividing the peat moss mass by its density (207 kg/m3).
  properties: heating value, net 17.88 MJ
- pesticide, unspecified: 0.000552303 kg; lognormal variance with pedigree 0.002, pedigree (1,3,2,1,2)
  This refers to production of all herbicides (except glyphosate), fungicides and insecticides.
  Uncertainty: D
  properties: carbon content, fossil 0.486978, dry mass 1 kg, wet mass 1 kg
- potassium chloride: 0.00100582 kg; lognormal variance with pedigree 0.002, pedigree (2,3,2,1,1)
  This refers to production of Alpine K Thio (as K2O), In-furrow liquid starter (as K2O), Potash (as K2O).
  Uncertainty: D
  properties: dry mass 1 kg, wet mass 1 kg
- sowing: 7.14192e-5 ha; lognormal variance with pedigree 0.0008, pedigree (1,1,2,1,1)
  This refers to sowing.
- sulfur: 0.00127742 kg; lognormal variance with pedigree 0.002, pedigree (2,3,2,1,1)
  This refers to production of 40 Rock (as S), Alpine K Thio (as S), MicroEssentials S10 (as S), MicroEssentials S15 - S, MicroEssentials SZ - S, Sulfur, and Tiger combo (as S).
  Uncertainty: D
  properties: dry mass 1 kg, wet mass 1 kg
- swath, by rotary windrower: 4.82119e-5 ha; lognormal variance with pedigree 0.0008, pedigree (1,1,2,1,1)
  This refers to swath, by rotary windrower.
- tillage, cultivating, chiselling: 0.000396758 ha; lognormal variance with pedigree 0.0008, pedigree (1,1,2,1,1)
  This refers to tillage, cultivating, chiselling.
- tillage, harrowing, by offset disc harrow: 0.000178522 ha; lognormal variance with pedigree 0.0008, pedigree (1,1,2,1,1)
  This refers to tillage, harrowing, by offset disk harrow.
- tillage, harrowing, by rotary harrow: 0.000131916 ha; lognormal variance with pedigree 0.0008, pedigree (1,1,2,1,1)
  This refers to tillage, harrowing, by rotary harrow.
- tillage, rolling: 0.000104403 ha; lognormal variance with pedigree 0.0008, pedigree (1,1,2,1,1)
  This refers to tillage, rolling.
- tillage, rotary cultivator: 0.000106542 ha; lognormal variance with pedigree 0.0008, pedigree (1,1,2,1,1)
  This refers to tillage, rotary cultivator.
- urea: 0.000151643 kg; lognormal variance with pedigree 0.002, pedigree (2,3,2,1,1)
  This refers to production of ESN (as N), Tiger combo (as N), and Urea (as N).
  Uncertainty: D
  properties: carbon content, fossil 0.2, dry mass 1 kg, wet mass 1 kg
- urea ammonium nitrate mix: 5.01379e-5 kg; lognormal variance with pedigree 0.002, pedigree (2,3,2,1,1)
  This refers to production of urea ammonium nitrate (as N).
  Uncertainty: D
  properties: carbon content, fossil 0.0879977, dry mass 0.75 kg, hydrogen content 0.095042, nitrogen content 0.401231, oxygen content 0.749063, water content 0.333333, wet mass 1 kg
  note on carbon content, fossil: Carbon content, fossil is calculated based on the chemical formula of the substance.
  note on hydrogen content: Hydrogen content (on a dry matter basis) of urea ammonium nitrate mix is calculated from the molecular formula of the substance (CH6N4O4).
  note on nitrogen content: Nitrogen content (on a dry matter basis) of urea ammonium nitrate mix is calculated from the molecular formula of the substance (CH6N4O4).
  note on oxygen content: Oxygen content (on a dry matter basis) of urea ammonium nitrate mix is calculated from the molecular formula of the substance (CH6N4O4).
- zinc: 2.48336e-5 kg; lognormal variance with pedigree 0.002, pedigree (2,3,2,1,1)
  This refers to production of MicroEssentials SZ - Zn.
  Uncertainty: D
  properties: dry mass 1 kg, wet mass 1 kg

## Inputs from nature
- Occupation, annual crop, non-irrigated [natural resource, land]: 3.31382 m2*year; lognormal variance with pedigree 0.0022, pedigree (1,1,2,1,1)
  Uncertainty: D
- Transformation, from unspecified [natural resource, land]: 3.31382 m2; lognormal variance with pedigree 0.0082, pedigree (1,1,2,1,1)
  Uncertainty: D
- Transformation, to annual crop, non-irrigated [natural resource, land]: 3.31382 m2; lognormal variance with pedigree 0.0082, pedigree (1,1,2,1,1)
  Uncertainty: D

## Emissions to nature
- Ammonia [air, low population density, long-term]: 9.17e-5 kg; lognormal variance with pedigree 0.0108, pedigree (3,3,2,1,1)
  Modelled with using the DeNitrification DeComposition (DNDC) -Management Factor Tool (DNDC-MFT) that was developed by Smith et al, (2010). The Canadian version of DNDC that has been used in this study was developed to include a crop growth model for cultivars grown in Canada as well as the impact of snow dynamics, crop biomass, and residue management on soil temperature (Dutta et al, 2016). (References: Dutta B, Smith WN, Grant BB, et al (2016) Model development in DNDC for the prediction of evapotranspiration and water use in temperate field cropping systems. Environ Model Softw 80:. https://doi.org/10.1016/j.envsoft.2016.02.014
  Uncertainty: D
- Azoxystrobin [air, non-urban air or from high stacks]: 1.56e-7 kg; lognormal variance with pedigree 0.0408, pedigree (1,3,2,1,1)
  Modelled, farm-level emissions from plant protection product application were modelled based on the active ingredients for each substance. As per Margni et al. (2002), it was assumed that, regardless of the timing of the products, 76.5% of the active ingredient of each agricultural plant protection product is emitted to soil, 8.5% to water, and 10% to air. This means a total of 95% of the applied active ingredient is emitted back to the environment. The last 5% is taken up by the plant and was therefore not considered as an emission in this model. (Reference: Margni M, Rossier D, Crettaz P, Jolliet O (2002) Life cycle impact assessment of pesticides on human health and ecosystems. Agric Ecosyst Environ 93:379–392. https://doi.org/10.1016/S0167-8809(01)00336-X)
  Uncertainty: D
- Bentazone [air, non-urban air or from high stacks]: 1.88e-5 kg; lognormal variance with pedigree 0.0408, pedigree (1,3,2,1,1)
  (same comment as for Azoxystrobin)
- Carbon dioxide, fossil [air, low population density, long-term]: 0.000326 kg; lognormal variance with pedigree 0.0008, pedigree (1,1,2,1,1)
  (same comment as for Ammonia)
- Carfentrazone-ethyl [air, non-urban air or from high stacks]: 1.36e-8 kg; lognormal variance with pedigree 0.0408, pedigree (1,3,2,1,1)
  (same comment as for Azoxystrobin)
- Chlorpyrifos [air, non-urban air or from high stacks]: 1.07e-7 kg; lognormal variance with pedigree 0.0408, pedigree (1,3,2,1,1)
  (same comment as for Azoxystrobin)
- Clethodim [air, non-urban air or from high stacks]: 2.61e-7 kg; lognormal variance with pedigree 0.0408, pedigree (1,3,2,1,1)
  (same comment as for Azoxystrobin)
- Deltamethrin [air, low population density, long-term]: 1.83e-9 kg; lognormal variance with pedigree 0.0408, pedigree (1,3,2,1,1)
  (same comment as for Azoxystrobin)
- Dimethoate [air, low population density, long-term]: 7.5e-9 kg; lognormal variance with pedigree 0.0408, pedigree (1,3,2,1,1)
  (same comment as for Azoxystrobin)
- Dinitrogen monoxide [air, low population density, long-term]: 1.26e-5 kg; lognormal variance with pedigree 0.0328, pedigree (3,3,2,1,1)
  (same comment as for Ammonia)
- Diquat dibromide [air, low population density, long-term]: 2.13e-7 kg; lognormal variance with pedigree 0.0408, pedigree (1,3,2,1,1)
  (same comment as for Azoxystrobin)
- Ethalfluralin [air, low population density, long-term]: 2.86e-9 kg; lognormal variance with pedigree 0.0408, pedigree (1,3,2,1,1)
  (same comment as for Azoxystrobin)
- Fludioxonil [air, low population density, long-term]: 2.75e-8 kg; lognormal variance with pedigree 0.0408, pedigree (1,3,2,1,1)
  (same comment as for Azoxystrobin)
- Flumioxazin [air, non-urban air or from high stacks]: 6.06e-8 kg; lognormal variance with pedigree 0.0408, pedigree (1,3,2,1,1)
  (same comment as for Azoxystrobin)
- Glyphosate [air, non-urban air or from high stacks]: 3.7e-5 kg; lognormal variance with pedigree 0.0408, pedigree (1,3,2,1,1)
  (same comment as for Azoxystrobin)
- Imazamox [air, non-urban air or from high stacks]: 8.16e-7 kg; lognormal variance with pedigree 0.0408, pedigree (1,3,2,1,1)
  (same comment as for Azoxystrobin)
- Imazethapyr [air, non-urban air or from high stacks]: 1.67e-7 kg; lognormal variance with pedigree 0.0408, pedigree (1,3,2,1,1)
  (same comment as for Azoxystrobin)
- Imidacloprid [air, low population density, long-term]: 6.89e-8 kg; lognormal variance with pedigree 0.0408, pedigree (1,3,2,1,1)
  (same comment as for Azoxystrobin)
- Lambda-cyhalothrin [air, non-urban air or from high stacks]: 1.28e-8 kg; lognormal variance with pedigree 0.0408, pedigree (1,3,2,1,1)
  (same comment as for Azoxystrobin)
- MCPA [air, non-urban air or from high stacks]: 3.61e-7 kg; lognormal variance with pedigree 0.0408, pedigree (1,3,2,1,1)
  (same comment as for Azoxystrobin)
- Metalaxyl-M [air, low population density, long-term]: 1.26e-7 kg; lognormal variance with pedigree 0.0408, pedigree (1,3,2,1,1)
  (same comment as for Azoxystrobin)
- Metribuzin [air, non-urban air or from high stacks]: 1.44e-7 kg; lognormal variance with pedigree 0.0408, pedigree (1,3,2,1,1)
  (same comment as for Azoxystrobin)
- Permethrin [air, non-urban air or from high stacks]: 1.85e-8 kg; lognormal variance with pedigree 0.0408, pedigree (1,3,2,1,1)
  (same comment as for Azoxystrobin)
- Propiconazole [air, non-urban air or from high stacks]: 1.03e-7 kg; lognormal variance with pedigree 0.0408, pedigree (1,3,2,1,1)
  (same comment as for Azoxystrobin)
- Prothioconazole [air, non-urban air or from high stacks]: 5.2e-7 kg; lognormal variance with pedigree 0.0408, pedigree (1,3,2,1,1)
  (same comment as for Azoxystrobin)
- Pyraclostrobin [air, non-urban air or from high stacks]: 1.48e-6 kg; lognormal variance with pedigree 0.0408, pedigree (1,3,2,1,1)
  (same comment as for Azoxystrobin)
- Pyraflufen-ethyl [air, unspecified]: 1.85e-9 kg; lognormal variance with pedigree 0.0408, pedigree (1,3,2,1,1)
  (same comment as for Azoxystrobin)
- Quizalofop-ethyl [air, non-urban air or from high stacks]: 1.07e-7 kg; lognormal variance with pedigree 0.0408, pedigree (1,3,2,1,1)
  (same comment as for Azoxystrobin)
- Sethoxydim [air, non-urban air or from high stacks]: 8.14e-7 kg; lognormal variance with pedigree 0.0408, pedigree (1,3,2,1,1)
  (same comment as for Azoxystrobin)
- Sulfentrazone [air, non-urban air or from high stacks]: 5.87e-7 kg; lognormal variance with pedigree 0.0408, pedigree (1,3,2,1,1)
  (same comment as for Azoxystrobin)
- Thiamethoxam [air, low population density, long-term]: 1.4e-8 kg; lognormal variance with pedigree 0.0408, pedigree (1,3,2,1,1)
  (same comment as for Azoxystrobin)
- Thiram [air, low population density, long-term]: 1.14e-7 kg; lognormal variance with pedigree 0.0408, pedigree (1,3,2,1,1)
  (same comment as for Azoxystrobin)
- Tribenuron-methyl [air, low population density, long-term]: 4.47e-9 kg; lognormal variance with pedigree 0.0408, pedigree (1,3,2,1,1)
  (same comment as for Azoxystrobin)
- Trifloxystrobin [air, non-urban air or from high stacks]: 5.85e-7 kg; lognormal variance with pedigree 0.0408, pedigree (1,3,2,1,1)
  (same comment as for Azoxystrobin)
- Trifluralin [air, non-urban air or from high stacks]: 6.9e-7 kg; lognormal variance with pedigree 0.0408, pedigree (1,3,2,1,1)
  (same comment as for Azoxystrobin)
- Azoxystrobin [soil, agricultural]: 1.19e-6 kg; lognormal variance with pedigree 0.0338, pedigree (1,3,2,1,1)
  (same comment as for Azoxystrobin)
- Bentazone [soil, agricultural]: 0.000143 kg; lognormal variance with pedigree 0.0338, pedigree (1,3,2,1,1)
  (same comment as for Azoxystrobin)
- Benzovindiflupyr [soil, agricultural]: 4.04e-7 kg; lognormal variance with pedigree 0.0338, pedigree (1,3,2,1,1)
  (same comment as for Azoxystrobin)
- Boscalid [soil, agricultural]: 5.58e-7 kg; lognormal variance with pedigree 0.0338, pedigree (1,3,2,1,1)
  (same comment as for Azoxystrobin)
- Cadmium II [soil, agricultural]: 2.06235e-7 kg; lognormal variance with pedigree 0.0419915, pedigree (2,2,2,1,1)
  The heavy metal emissions are calculated by SALCA-heavy metal (Freiermuth 2006) using the ecoinvent LCI calculation tool for crop production.
  Uncertainty: C
- Carboxin [soil, agricultural]: 1.01e-6 kg; lognormal variance with pedigree 0.0338, pedigree (1,3,2,1,1)
  (same comment as for Azoxystrobin)
- Carfentrazone-ethyl [soil, agricultural]: 1.04e-7 kg; lognormal variance with pedigree 0.0338, pedigree (1,3,2,1,1)
  (same comment as for Azoxystrobin)
- Chlorantraniliprole [soil, agricultural]: 1.96e-7 kg; lognormal variance with pedigree 0.0338, pedigree (1,3,2,1,1)
  (same comment as for Azoxystrobin)
- Chlorpyrifos [soil, agricultural]: 8.16e-7 kg; lognormal variance with pedigree 0.0338, pedigree (1,3,2,1,1)
  (same comment as for Azoxystrobin)
- Chromium III [soil, agricultural]: -1.63902e-5 kg
  The heavy metal emissions are calculated by SALCA-heavy metal (Freiermuth 2006) using the ecoinvent LCI calculation tool for crop production.
- Clethodim [soil, agricultural]: 2e-6 kg; lognormal variance with pedigree 0.0338, pedigree (1,3,2,1,1)
  (same comment as for Azoxystrobin)
- Copper ion [soil, agricultural]: -1.64049e-5 kg
  (same comment as for Chromium III)
- Deltamethrin [soil, agricultural]: 1.4e-8 kg; lognormal variance with pedigree 0.0338, pedigree (1,3,2,1,1)
  (same comment as for Azoxystrobin)
- Dimethoate [soil, agricultural]: 5.74e-8 kg; lognormal variance with pedigree 0.0338, pedigree (1,3,2,1,1)
  (same comment as for Azoxystrobin)
- Diquat dibromide [soil, agricultural]: 1.63e-6 kg; lognormal variance with pedigree 0.0338, pedigree (1,3,2,1,1)
  (same comment as for Azoxystrobin)
- Ethaboxam [soil, agricultural]: 5.17e-7 kg; lognormal variance with pedigree 0.0338, pedigree (1,3,2,1,1)
  (same comment as for Azoxystrobin)
- Ethalfluralin [soil, agricultural]: 2.19e-8 kg; lognormal variance with pedigree 0.0338, pedigree (1,3,2,1,1)
  (same comment as for Azoxystrobin)
- Fludioxonil [soil, agricultural]: 2.11e-7 kg; lognormal variance with pedigree 0.0338, pedigree (1,3,2,1,1)
  (same comment as for Azoxystrobin)
- Flumioxazin [soil, agricultural]: 4.64e-7 kg; lognormal variance with pedigree 0.0338, pedigree (1,3,2,1,1)
  (same comment as for Azoxystrobin)
- Fluxapyroxad [soil, agricultural]: 4.88e-6 kg; lognormal variance with pedigree 0.0338, pedigree (1,3,2,1,1)
  (same comment as for Azoxystrobin)
- Glyphosate [soil, agricultural]: 0.0002827 kg; lognormal variance with pedigree 0.0338, pedigree (1,3,2,1,1)
  (same comment as for Azoxystrobin)
- Imazamox [soil, agricultural]: 6.24e-6 kg; lognormal variance with pedigree 0.0338, pedigree (1,3,2,1,1)
  (same comment as for Azoxystrobin)
- Imazethapyr [soil, agricultural]: 1.28e-6 kg; lognormal variance with pedigree 0.0338, pedigree (1,3,2,1,1)
  (same comment as for Azoxystrobin)
- Imidacloprid [soil, agricultural]: 5.27e-7 kg; lognormal variance with pedigree 0.0338, pedigree (1,3,2,1,1)
  (same comment as for Azoxystrobin)
- Lambda-cyhalothrin [soil, agricultural]: 9.78e-8 kg; lognormal variance with pedigree 0.0338, pedigree (1,3,2,1,1)
  (same comment as for Azoxystrobin)
- Lead II [soil, agricultural]: -4.25032e-6 kg
  (same comment as for Chromium III)
- MCPA [soil, agricultural]: 2.76e-6 kg; lognormal variance with pedigree 0.0338, pedigree (1,3,2,1,1)
  (same comment as for Azoxystrobin)
- Mercury II [soil, agricultural]: -5.36852e-8 kg
  (same comment as for Chromium III)
- Metalaxyl-M [soil, agricultural]: 9.67e-7 kg; lognormal variance with pedigree 0.0338, pedigree (1,3,2,1,1)
  (same comment as for Azoxystrobin)
- Metribuzin [soil, agricultural]: 1.1e-6 kg; lognormal variance with pedigree 0.0338, pedigree (1,3,2,1,1)
  (same comment as for Azoxystrobin)
- Nickel II [soil, agricultural]: -7.79352e-6 kg
  (same comment as for Chromium III)
- Nitrate [soil, unspecified]: 2.36e-5 kg; lognormal variance with pedigree 0.0358, pedigree (3,3,2,1,1)
  (same comment as for Ammonia)
- Penflufen [soil, agricultural]: 2.11e-8 kg; lognormal variance with pedigree 0.0338, pedigree (1,3,2,1,1)
  (same comment as for Azoxystrobin)
- Permethrin [soil, agricultural]: 1.41e-7 kg; lognormal variance with pedigree 0.0338, pedigree (1,3,2,1,1)
  (same comment as for Azoxystrobin)
- Phosphorus [soil, agricultural]: 5.73e-5 kg; lognormal variance with pedigree 0.0358, pedigree (3,3,2,1,1)
  (same comment as for Ammonia)
- Picoxystrobin [soil, agricultural]: 2.48e-6 kg; lognormal variance with pedigree 0.0338, pedigree (1,3,2,1,1)
  (same comment as for Azoxystrobin)
- Propiconazole [soil, agricultural]: 7.84e-7 kg; lognormal variance with pedigree 0.0338, pedigree (1,3,2,1,1)
  (same comment as for Azoxystrobin)
- Prothioconazole [soil, agricultural]: 3.98e-6 kg; lognormal variance with pedigree 0.0338, pedigree (1,3,2,1,1)
  (same comment as for Azoxystrobin)
- Pyraclostrobin [soil, agricultural]: 1.13e-5 kg; lognormal variance with pedigree 0.0338, pedigree (1,3,2,1,1)
  (same comment as for Azoxystrobin)
- Pyraflufen-ethyl [soil, agricultural]: 1.42e-8 kg; lognormal variance with pedigree 0.0338, pedigree (1,3,2,1,1)
  (same comment as for Azoxystrobin)
- Pyroxasulfone [soil, agricultural]: 2.1e-6 kg; lognormal variance with pedigree 0.0338, pedigree (1,3,2,1,1)
  (same comment as for Azoxystrobin)
- Quizalofop-ethyl [soil, agricultural]: 8.15e-7 kg; lognormal variance with pedigree 0.0338, pedigree (1,3,2,1,1)
  (same comment as for Azoxystrobin)
- Saflufenacil [soil, agricultural]: 2.27e-6 kg; lognormal variance with pedigree 0.0338, pedigree (1,3,2,1,1)
  (same comment as for Azoxystrobin)
- Sedaxane [soil, agricultural]: 4.22e-7 kg; lognormal variance with pedigree 0.0338, pedigree (1,3,2,1,1)
  (same comment as for Azoxystrobin)
- Sethoxydim [soil, agricultural]: 6.23e-6 kg; lognormal variance with pedigree 0.0338, pedigree (1,3,2,1,1)
  (same comment as for Azoxystrobin)
- Sulfentrazone [soil, agricultural]: 4.49e-6 kg; lognormal variance with pedigree 0.0338, pedigree (1,3,2,1,1)
  (same comment as for Azoxystrobin)
- Thiamethoxam [soil, agricultural]: 1.07e-7 kg; lognormal variance with pedigree 0.0338, pedigree (1,3,2,1,1)
  (same comment as for Azoxystrobin)
- Thiram [soil, agricultural]: 8.7e-7 kg; lognormal variance with pedigree 0.0338, pedigree (1,3,2,1,1)
  (same comment as for Azoxystrobin)
- Tribenuron-methyl [soil, agricultural]: 3.42e-8 kg; lognormal variance with pedigree 0.0338, pedigree (1,3,2,1,1)
  (same comment as for Azoxystrobin)
- Trifloxystrobin [soil, agricultural]: 4.47e-6 kg; lognormal variance with pedigree 0.0338, pedigree (1,3,2,1,1)
  (same comment as for Azoxystrobin)
- Trifluralin [soil, agricultural]: 5.28e-6 kg; lognormal variance with pedigree 0.0338, pedigree (1,3,2,1,1)
  (same comment as for Azoxystrobin)
- Zinc II [soil, agricultural]: -3.95694e-5 kg
  (same comment as for Chromium III)
- Azoxystrobin [water, ground-]: 1.32e-7 kg; lognormal variance with pedigree 0.0408, pedigree (1,3,2,1,1)
  (same comment as for Azoxystrobin)
- Bentazone [water, ground-]: 1.59e-5 kg; lognormal variance with pedigree 0.0408, pedigree (1,3,2,1,1)
  (same comment as for Azoxystrobin)
- Benzovindiflupyr [water, ground-]: 4.49e-8 kg; lognormal variance with pedigree 0.0408, pedigree (1,3,2,1,1)
  (same comment as for Azoxystrobin)
- Cadmium II [water, ground-]: 1.20244e-8 kg; lognormal variance with pedigree 0.0872596, pedigree (2,2,2,1,1)
  (same comment as for Cadmium II)
- Cadmium II [water, surface water]: 1.34744e-7 kg; lognormal variance with pedigree 0.0872596, pedigree (2,2,2,1,1)
  (same comment as for Cadmium II)
- Carboxin [water, ground-]: 1.13e-7 kg; lognormal variance with pedigree 0.0408, pedigree (1,3,2,1,1)
  (same comment as for Azoxystrobin)
- Carfentrazone-ethyl [water, ground-]: 1.15e-8 kg; lognormal variance with pedigree 0.0408, pedigree (1,3,2,1,1)
  (same comment as for Azoxystrobin)
- Chlorantraniliprole [water, ground-]: 2.17e-8 kg; lognormal variance with pedigree 0.0408, pedigree (1,3,2,1,1)
  (same comment as for Azoxystrobin)
- Chlorpyrifos [water, ground-]: 9.07e-8 kg; lognormal variance with pedigree 0.0408, pedigree (1,3,2,1,1)
  (same comment as for Azoxystrobin)
- Chromium III [water, ground-]: 5.9962e-6 kg; lognormal variance with pedigree 0.0872596, pedigree (2,2,2,1,1)
  (same comment as for Cadmium II)
- Chromium III [water, surface water]: 1.59133e-5 kg; lognormal variance with pedigree 0.0872596, pedigree (2,2,2,1,1)
  (same comment as for Cadmium II)
- Clethodim [water, ground-]: 2.22e-7 kg; lognormal variance with pedigree 0.0408, pedigree (1,3,2,1,1)
  (same comment as for Azoxystrobin)
- Copper ion [water, ground-]: 8.28805e-7 kg; lognormal variance with pedigree 0.0872596, pedigree (2,2,2,1,1)
  (same comment as for Cadmium II)
- Copper ion [water, surface water]: 1.08031e-5 kg; lognormal variance with pedigree 0.0872596, pedigree (2,2,2,1,1)
  (same comment as for Cadmium II)
- Deltamethrin [water, ground-]: 1.55e-9 kg; lognormal variance with pedigree 0.0408, pedigree (1,3,2,1,1)
  (same comment as for Azoxystrobin)
- Dimethoate [water, ground-]: 6.38e-9 kg; lognormal variance with pedigree 0.0408, pedigree (1,3,2,1,1)
  (same comment as for Azoxystrobin)
- Diquat dibromide [water, ground-]: 1.81e-7 kg; lognormal variance with pedigree 0.0408, pedigree (1,3,2,1,1)
  (same comment as for Azoxystrobin)
- Ethaboxam [water, ground-]: 5.75e-8 kg; lognormal variance with pedigree 0.0408, pedigree (1,3,2,1,1)
  (same comment as for Azoxystrobin)
- Ethalfluralin [water, ground-]: 2.43e-9 kg; lognormal variance with pedigree 0.0408, pedigree (1,3,2,1,1)
  (same comment as for Azoxystrobin)
- Fludioxonil [water, ground-]: 2.34e-8 kg; lognormal variance with pedigree 0.0408, pedigree (1,3,2,1,1)
  (same comment as for Azoxystrobin)
- Flumioxazin [water, ground-]: 5.15e-8 kg; lognormal variance with pedigree 0.0408, pedigree (1,3,2,1,1)
  (same comment as for Azoxystrobin)
- Fluxapyroxad [water, ground-]: 5.42e-7 kg; lognormal variance with pedigree 0.0408, pedigree (1,3,2,1,1)
  (same comment as for Azoxystrobin)
- Glyphosate [water, ground-]: 3.14e-5 kg; lognormal variance with pedigree 0.0408, pedigree (1,3,2,1,1)
  (same comment as for Azoxystrobin)
- Imazamox [water, ground-]: 6.93e-7 kg; lognormal variance with pedigree 0.0408, pedigree (1,3,2,1,1)
  (same comment as for Azoxystrobin)
- Imazethapyr [water, ground-]: 1.42e-7 kg; lognormal variance with pedigree 0.0408, pedigree (1,3,2,1,1)
  (same comment as for Azoxystrobin)
- Imidacloprid [water, ground-]: 5.86e-8 kg; lognormal variance with pedigree 0.0408, pedigree (1,3,2,1,1)
  (same comment as for Azoxystrobin)
- Lambda-cyhalothrin [water, ground-]: 1.09e-8 kg; lognormal variance with pedigree 0.0408, pedigree (1,3,2,1,1)
  (same comment as for Azoxystrobin)
- Lead II [water, ground-]: 1.17289e-7 kg; lognormal variance with pedigree 0.0872596, pedigree (2,2,2,1,1)
  (same comment as for Cadmium II)
- Lead II [water, surface water]: 8.89903e-6 kg; lognormal variance with pedigree 0.0872596, pedigree (2,2,2,1,1)
  (same comment as for Cadmium II)
- MCPA [water, ground-]: 3.06e-7 kg; lognormal variance with pedigree 0.0408, pedigree (1,3,2,1,1)
  (same comment as for Azoxystrobin)
- Mercury II [water, ground-]: 1.50589e-10 kg; lognormal variance with pedigree 0.0872596, pedigree (2,2,2,1,1)
  (same comment as for Cadmium II)
- Mercury II [water, surface water]: 1.97413e-8 kg; lognormal variance with pedigree 0.0872596, pedigree (2,2,2,1,1)
  (same comment as for Cadmium II)
- Metalaxyl-M [water, ground-]: 1.07e-7 kg; lognormal variance with pedigree 0.0408, pedigree (1,3,2,1,1)
  (same comment as for Azoxystrobin)
- Metribuzin [water, ground-]: 1.23e-7 kg; lognormal variance with pedigree 0.0408, pedigree (1,3,2,1,1)
  (same comment as for Azoxystrobin)
- Nickel II [water, surface water]: 7.37531e-6 kg; lognormal variance with pedigree 0.0872596, pedigree (2,2,2,1,1)
  (same comment as for Cadmium II)
- Penflufen [water, ground-]: 2.34e-9 kg; lognormal variance with pedigree 0.0408, pedigree (1,3,2,1,1)
  (same comment as for Azoxystrobin)
- Permethrin [water, unspecified]: 1.57e-8 kg; lognormal variance with pedigree 0.0408, pedigree (1,3,2,1,1)
  (same comment as for Azoxystrobin)
- Phosphorus [water, ground-]: 0.00015 kg; lognormal variance with pedigree 0.0428, pedigree (3,3,2,1,1)
  (same comment as for Ammonia)
- Propiconazole [water, ground-]: 8.71e-8 kg; lognormal variance with pedigree 0.0408, pedigree (1,3,2,1,1)
  (same comment as for Azoxystrobin)
- Prothioconazole [water, ground-]: 4.42e-7 kg; lognormal variance with pedigree 0.0408, pedigree (1,3,2,1,1)
  (same comment as for Azoxystrobin)
- Pyraclostrobin [water, ground-]: 1.26e-6 kg; lognormal variance with pedigree 0.0408, pedigree (1,3,2,1,1)
  (same comment as for Azoxystrobin)
- Pyroxasulfone [water, ground-]: 2.33e-7 kg; lognormal variance with pedigree 0.0408, pedigree (1,3,2,1,1)
  (same comment as for Azoxystrobin)
- Quizalofop-ethyl [water, ground-]: 9.05e-8 kg; lognormal variance with pedigree 0.0408, pedigree (1,3,2,1,1)
  (same comment as for Azoxystrobin)
- Saflufenacil [water, ground-]: 2.53e-7 kg; lognormal variance with pedigree 0.0408, pedigree (1,3,2,1,1)
  (same comment as for Azoxystrobin)
- Sedaxane [water, ground-]: 4.69e-8 kg; lognormal variance with pedigree 0.0408, pedigree (1,3,2,1,1)
  (same comment as for Azoxystrobin)
- Sethoxydim [water, ground-]: 6.92e-7 kg; lognormal variance with pedigree 0.0408, pedigree (1,3,2,1,1)
  (same comment as for Azoxystrobin)
- Sulfentrazone [water, ground-]: 4.99e-7 kg; lognormal variance with pedigree 0.0408, pedigree (1,3,2,1,1)
  (same comment as for Azoxystrobin)
- Thiamethoxam [water, ground-]: 1.19e-8 kg; lognormal variance with pedigree 0.0408, pedigree (1,3,2,1,1)
  (same comment as for Azoxystrobin)
- Thiram [water, ground-]: 9.67e-8 kg; lognormal variance with pedigree 0.0408, pedigree (1,3,2,1,1)
  (same comment as for Azoxystrobin)
- Tribenuron-methyl [water, ground-]: 3.8e-9 kg; lognormal variance with pedigree 0.0408, pedigree (1,3,2,1,1)
  (same comment as for Azoxystrobin)
- Trifloxystrobin [water, ground-]: 4.97e-7 kg; lognormal variance with pedigree 0.0408, pedigree (1,3,2,1,1)
  (same comment as for Azoxystrobin)
- Trifluralin [water, ground-]: 5.87e-7 kg; lognormal variance with pedigree 0.0408, pedigree (1,3,2,1,1)
  (same comment as for Azoxystrobin)
- Zinc II [water, ground-]: 5.23719e-6 kg; lognormal variance with pedigree 0.0872596, pedigree (2,2,2,1,1)
  (same comment as for Cadmium II)
- Zinc II [water, surface water]: 1.83768e-5 kg; lognormal variance with pedigree 0.0872596, pedigree (2,2,2,1,1)
  (same comment as for Cadmium II)

## Sampling procedure
Site-specific field data were collected via survey from prairie province pea producers for crop rotation, seeding rate, machinery and fuel use for field operations (e.g., tillage, harrowing, harvest), farm inputs (e.g., fertilizers, pesticides), and electricity for crop drying. Production weighted averages were calculated for the region. Outliers were removed from reported fuel use data based on visual inspection.

## Extrapolations
Geographical location of each farm was used to identify the Reconciliation Units (soil and climate based provincial divisions) identified by Agriculture and Agri-Food Canada (AAFC) and AAFC Reporting Zone (ecozone) to which each farm belongs. Production-weighted average datasets were calculated for each ecozone.

## Review by Jens Lansche 2021-02-02
All comments from the previous reviews have been taken into account in the current version.
