# treatment of waste graphical paper, sanitary landfill

Dataset: EcoSpold 2, unit process
Geography: CH
Time period: 1994-01-01 to 2022-12-31
Technology level: current
Classification: EcoSpold01Categories: waste management/sanitary landfill
Classification: ISIC rev.4 ecoinvent: 3821:Treatment and disposal of non-hazardous waste
Tags: Treatment
Scenario: Business-as-Usual
System model: Allocation at the point of substitution
Generated by: Gabor Doka (obsolete)
Database: ecoinvent
isCopyrightProtected: true

## General comment
Proxy dataset for landfilling of waste graphical paper, generated as a copy of a previous dataset for 'average paper' by Gabor Doka, with only adjustment of the uncertainty DQI. Upper heating value of waste: 16.61 MJ/kg; lower heating value of waste: 14.12 MJ/kg; Waste composition (wet, in ppm): H2O 110830; O 378670; H 53852; C 404000; S 1406.7; N 3756.6; P 112.95; B 17.19; Cl 1837.5; Br n.a.; F 19.468; I n.a.; Ag 0.047733; As 2.0485; Ba 114.24; Cd 1.6629; Co 0.7359; Cr 14.461; Cu 60.893; Hg 0.13902; Mn 40.221; Mo 4.2976; Ni 9.4431; Pb 80.374; Sb 0.70911; Se 2.5786; Sn n.a.; V n.a.; Zn 124.8; Be 0.97413; Sc n.a.; Sr 58.276; Ti 171.9; Tl 1.719; W n.a.; Si 21255; Fe 1188.4; Ca 3438.1; Al 12391; K 1327.5; Mg 4297.6; Na 918.83;
Share of carbon in waste that is biogenic 100%.
Overall degradability of waste during 100 years: 27%.
This is a dataset copied from a dataset from ecoSpold v1 / ecoinvent database version 2. It may not in all aspects fulfill the requirements of the ecoinvent data quality guideline for version 3.

## Included activities end
Waste-specific short-term emissions to air via landfill gas incineration and landfill leachate. Burdens from treatment of short-term leachate (0-100a) in wastewater treatment plant (including WWTP sludge disposal in municipal incinerator). Long-term emissions from landfill to groundwater (after base lining failure).

## Geography
Technology encountered in Switzerland in 2000. Landfill includes base seal, leachate collection system, treatment of leachate in municipal wastewater treatment plant.

## Technology
Swiss municipal sanitary landfill for biogenic or untreated municipal waste ('reactive organic landfill'). Landfill gas and leachate collection system. Recultivation and monitoring for 150 years after closure.

## Reference product
- waste graphical paper: -1 kg; name RP_amount_1; By-product classification Waste; CPC 39990: Other wastes n.e.c.
  production volume 2.11858e6 kg
    Calculated based on literature value and estimates. The total production of graphical paper in the world in 2007 is 1.5E11kg (http://www.statista.com/statistics/167107/production-volume-of-paper-by-type/, accessed 20130313).
    It is estimated, that 30% of the waste graphical paper is landfilled.
    The world's production volume of graphical paper is scaled to Switzerland production volume based on the GDP;
    2.66E11 current international dollar, 2005, GDP-PPP of Switzerland (IMF)
    5.65E13 current international dollar, 2005, GDP-PPP of the whole world (IMF)
  property heating value, net 14.12 MJ
    Value taken from the general comment of the treatment dataset.
  property price 0 EUR2005
    Waste products are assigned a price of zero as they are assumed to require further treatment.
  properties: carbon allocation 0.404 kg, carbon content 0.454955, carbon content, fossil 0, carbon content, non-fossil 0.454955, dry mass 0.888 kg, water content 0.126126, water in wet mass 0.112 kg, wet mass 1 kg

## Inputs from technosphere
- aluminium sulfate, powder: 2.19e-6 kg; lognormal variance with pedigree 1.44, pedigree (5,5,5,5,5)
  burden from wastewater treatment of the short-term leachate (0-100a). Uncertainty calculated from unertainty of the waste composition of this waste, uncertainty in waste decomposition and short-term leaching in sanitary landfill
  properties: dry mass 1 kg, wet mass 1 kg
- ammonia, anhydrous, liquid: 3.56e-6 kg; lognormal variance with pedigree 0.49, pedigree (1,1,5,1,4)
  burden from incineration of sludge from wastewater treatment of the short-term leachate (0-100a). uncertainty is calculated from uncertainties in waste composition and transfer coefficients in incinerator and uncertainty of waste decomposition and short-term leaching in sanitary landfill
  properties: dry mass 1 kg, wet mass 1 kg
- cement, unspecified: 4.83e-5 kg; lognormal variance with pedigree 0.32, pedigree (1,1,5,1,4)
  (same comment as for ammonia, anhydrous, liquid)
  properties: dry mass 1 kg, wet mass 1 kg
- chemical, inorganic: 1.03e-8 kg; lognormal variance with pedigree 1.1, pedigree (1,1,5,1,4)
  (same comment as for ammonia, anhydrous, liquid)
  properties: carbon content, fossil 0.003, dry mass 1 kg, wet mass 1 kg
  note on carbon content, fossil: This dataset is an unweighted average of 20 inorganic substances (listed in Tab 88.1, ecoinvent v2.2 report 8, part II), being part of the top100 chemicals included in this database. The C-content has also been calculated as an unweighted average of the C content of the substances composing this dataset.
- chemical, organic: 1.26e-7 kg; lognormal variance with pedigree 1.71, pedigree (1,1,5,1,4)
  (same comment as for ammonia, anhydrous, liquid)
  properties: carbon content, fossil 0.628, dry mass 1 kg, heating value, net 19.03 MJ, wet mass 1 kg
  note on carbon content, fossil: This dataset is an unweighted average of 20 organic substances (listed in Tab 88.1, ecoinvent v2.2 report 8, part II), being part of the top100 chemicals included in this database. The C-content has also been calculated as an unweighted average of the C content of the substances composing this dataset.
- chromium oxide, flakes: 2.08e-9 kg; lognormal variance with pedigree 0.8, pedigree (5,5,5,5,5)
  burden from incineration of sludge from wastewater treatment of the short-term leachate (0-100a). Proxy for vanadium pentoxide V2O5 in SCR catalyst, uncertainty calculated from uncertainty in average DeNOx input, uncertainty in the share of thermal NOx, uncertainty of nitrogen content in average municipal waste and the unertainty in nitrogen content in *this* waste and uncertainty of waste decomposition and short-term leaching in sanitary landfill
  properties: dry mass 1 kg, wet mass 1 kg
- electricity, for reuse in municipal waste incineration only: 0.000512 kWh; name E_el_prod_MSWI; lognormal variance with pedigree 0.44, pedigree (1,1,5,1,4)
  (same comment as for ammonia, anhydrous, liquid)
- electricity, low voltage: 0.0141 kWh; lognormal variance with pedigree 0.39, pedigree (5,5,5,5,5)
  (same comment as for aluminium sulfate, powder)
- heat, central or small-scale, other than natural gas: 0.00069278 MJ; lognormal variance with pedigree 0.36, pedigree (5,5,5,5,5)
  (same comment as for aluminium sulfate, powder)
  properties: heating value, net 1 MJ
- heat, district or industrial, natural gas: 0.0012675 MJ; lognormal variance with pedigree 0.23, pedigree (1,1,5,1,4)
  (same comment as for aluminium sulfate, powder)
  properties: heating value, net 1 MJ
- heat, for reuse in municipal waste incineration only: 0.00299 MJ; name E_th_prod_MSWI; lognormal variance with pedigree 0.24, pedigree (1,1,5,1,4)
  (same comment as for ammonia, anhydrous, liquid)
- hydrochloric acid, without water, in 30% solution state: 6.19e-9 kg; lognormal variance with pedigree 1.1, pedigree (1,1,5,1,4)
  (same comment as for ammonia, anhydrous, liquid)
  properties: dry mass 1 kg, heating value, net 3.32 MJ, wet mass 1 kg
- iron (III) chloride, without water, in 40% solution state: 1.12e-5 kg; lognormal variance with pedigree 1.34, pedigree (1,1,5,1,4)
  (same comment as for ammonia, anhydrous, liquid)
  properties: dry mass 1 kg, wet mass 1 kg
- iron sulfate: 8.09e-6 kg; lognormal variance with pedigree 1.44, pedigree (5,5,5,5,5)
  (same comment as for aluminium sulfate, powder)
  properties: dry mass 1 kg, wet mass 1 kg
- municipal waste incineration facility: 8.91e-13 unit; lognormal variance with pedigree 0.24, pedigree (1,1,5,1,4)
  Burden from incineration of sludge from wastewater treatment of the short-term leachate (0-100a).
  Burden from incineration of sludge from wastewater treatment of the short-term leachate (0-100a).
- process-specific burdens, municipal waste incineration: 0.00356 kg; lognormal variance with pedigree 0.24, pedigree (1,1,5,1,4)
  Burden from incineration of sludge from wastewater treatment of the short-term leachate (0-100a).
  Burden from incineration of sludge from wastewater treatment of the short-term leachate (0-100a).;activityLink introduced to establish a direct link to the corresponding regional supply of this product
- process-specific burdens, residual material landfill: 0.000121 kg; lognormal variance with pedigree 0.32, pedigree (1,1,5,1,4)
  burden from incineration of sludge from wastewater treatment of the short-term leachate (0-100a). uncertainty is calculated from uncertainties in waste composition and transfer coefficients in incinerator and uncertainty of waste decomposition and short-term leaching in sanitary landfill;activityLink introduced to establish a direct link to the corresponding regional supply of this product
- process-specific burdens, sanitary landfill: 1 kg; lognormal variance with pedigree 0.04, pedigree (1,1,5,1,1)
  demands per kilogram waste. uncertainty is heeded in the module;activityLink introduced to establish a direct link to the corresponding regional supply of this product
- process-specific burdens, slag landfill: 0.00097 kg; lognormal variance with pedigree 0.37, pedigree (1,1,5,1,4)
  (same comment as for process-specific burdens, residual material landfill)
- quicklime, milled, packed: 3.26e-8 kg; lognormal variance with pedigree 0.4, pedigree (1,1,5,1,4)
  (same comment as for ammonia, anhydrous, liquid)
  properties: dry mass 0.99 kg, water content 0.010101, wet mass 1 kg
- residual material landfill: 2.51e-13 unit; lognormal variance with pedigree 0.32, pedigree (1,1,5,1,4)
  (same comment as for ammonia, anhydrous, liquid)
- sanitary landfill facility: 5.56e-10 unit; lognormal variance with pedigree 0.04, pedigree (1,1,5,1,1)
  demands per kilogram waste. uncertainty is heeded in the module
  This exchange has an activity link directly to the producing activity because the product is primarily consumed in the same geographical area where it is produced.
- sewer grid, 5E9l/year, 110 km: 5.45e-10 km; lognormal variance with pedigree 0.2106, pedigree (5,5,5,5,5)
  (same comment as for aluminium sulfate, powder)
- slag landfill: 1.72e-12 unit; lognormal variance with pedigree 0.37, pedigree (1,1,5,1,4)
  (same comment as for ammonia, anhydrous, liquid)
- sodium hydroxide, without water, in 50% solution state: 1.8e-7 kg; lognormal variance with pedigree 0.4, pedigree (1,1,5,1,4)
  (same comment as for ammonia, anhydrous, liquid)
  properties: dry mass 1 kg, heating value, net 3.03 MJ, wet mass 1 kg
- titanium dioxide: 1.02e-7 kg; lognormal variance with pedigree 0.72, pedigree (1,1,5,1,4)
  (same comment as for ammonia, anhydrous, liquid)
  properties: dry mass 1 kg, wet mass 1 kg
- waste cement, hydrated: -0.000121 kg; name BP_amount_1; lognormal variance with pedigree 0.24, pedigree (1,1,1,1,1)
  (same comment as for ammonia, anhydrous, liquid)
  production volume
    Calculated from the production volume of waste paper, 11.2% water in proportion to the respective output amounts.
  properties: dry mass 1 kg, wet mass 1 kg
- waste graphical paper: -3.88e-5 kg; name BP_amount_3; lognormal variance with pedigree 0.45, pedigree (5,5,5,5,5)
  (same comment as for aluminium sulfate, powder)
  production volume
    (same comment as for waste cement, hydrated)
  properties: carbon content, non-fossil 0.454955, dry mass 0.888 kg, heating value, net 14.12 MJ, water content 0.126126, wet mass 1 kg
  note on heating value, net: Value taken from the general comment of the treatment dataset.
- waste plastic, mixture: -3.88e-5 kg; name BP_amount_2; lognormal variance with pedigree 0.45, pedigree (5,5,5,5,5)
  (same comment as for aluminium sulfate, powder)
  production volume
    (same comment as for waste cement, hydrated)
  properties: carbon content, fossil 0.747344, dry mass 0.847 kg, heating value, net 30.79 MJ, water content 0.180638, wet mass 1 kg
  note on carbon content, fossil: C content in 1 kg DM was calculated using data in Tab A.2, ecoinvent v2.2 report 13_I
- wastewater treatment facility, capacity 5E9l/year: 1.42e-11 unit; lognormal variance with pedigree 0.2106, pedigree (5,5,5,5,5)
  (same comment as for aluminium sulfate, powder)

## Emissions to nature
- Aluminium III [air, non-urban air or from high stacks]: 4.18e-8 kg; lognormal variance with pedigree 1.82, pedigree (1,1,5,1,4)
  burden from direct release or incineration of landfill biogas. Uncertainty calculated from unertainty of the waste composition of this waste, uncertainty in waste decomposition and short-term leaching in sanitary landfill
- Aluminium III [air, urban air close to ground]: 2.46e-7 kg; lognormal variance with pedigree 0.79, pedigree (1,1,5,1,4)
  Emissions from short-term leachate treatment and incineration of resulting sludge. Uncertainty calculated depending on waste input and uncertainty of transfer coefficents in landfill, wastewater treatment and incineration model.
- Ammonia [air, urban air close to ground]: 2.26e-6 kg; lognormal variance with pedigree 0.41, pedigree (1,1,5,1,4)
  (same comment as for Aluminium III)
- Antimony ion [air, non-urban air or from high stacks]: 5.05e-12 kg; lognormal variance with pedigree 3, pedigree (1,1,5,1,4)
  (same comment as for Aluminium III)
- Antimony ion [air, urban air close to ground]: 9.94e-13 kg; lognormal variance with pedigree 2.59, pedigree (1,1,5,1,4)
  (same comment as for Aluminium III)
- Arsenic ion [air, non-urban air or from high stacks]: 1.39e-9 kg; lognormal variance with pedigree 2.26, pedigree (1,1,5,1,4)
  (same comment as for Aluminium III)
- Arsenic ion [air, urban air close to ground]: 2.8e-11 kg; lognormal variance with pedigree 1.78, pedigree (1,1,5,1,4)
  (same comment as for Aluminium III)
- Barium II [air, non-urban air or from high stacks]: 8.83e-9 kg; lognormal variance with pedigree 2.01, pedigree (1,1,5,1,4)
  (same comment as for Aluminium III)
- Barium II [air, urban air close to ground]: 3.32e-8 kg; lognormal variance with pedigree 1.1, pedigree (1,1,5,1,4)
  (same comment as for Aluminium III)
- Beryllium II [air, non-urban air or from high stacks]: 3.82e-12 kg; lognormal variance with pedigree 3.03, pedigree (1,1,5,1,4)
  (same comment as for Aluminium III)
- Beryllium II [air, urban air close to ground]: 7.53e-12 kg; lognormal variance with pedigree 2, pedigree (1,1,5,1,4)
  (same comment as for Aluminium III)
- Boron [air, urban air close to ground]: 1.02e-6 kg; lognormal variance with pedigree 1.3, pedigree (1,1,5,1,4)
  (same comment as for Aluminium III)
- Cadmium II [air, non-urban air or from high stacks]: 5.27e-10 kg; lognormal variance with pedigree 2.39, pedigree (1,1,5,1,4)
  (same comment as for Aluminium III)
- Cadmium II [air, urban air close to ground]: 2.16e-12 kg; lognormal variance with pedigree 1.83, pedigree (1,1,5,1,4)
  (same comment as for Aluminium III)
- Calcium [air, non-urban air or from high stacks]: 3.02e-8 kg; lognormal variance with pedigree 1.86, pedigree (1,1,5,1,4)
  (same comment as for Aluminium III)
- Calcium [air, urban air close to ground]: 1.98e-8 kg; lognormal variance with pedigree 0.84, pedigree (1,1,5,1,4)
  (same comment as for Aluminium III)
- Carbon dioxide, non-fossil [air, non-urban air or from high stacks]: 0.273 kg; lognormal variance with pedigree 0.15, pedigree (1,1,5,1,4)
  (same comment as for Aluminium III)
- Carbon dioxide, non-fossil [air, urban air close to ground]: 0.00912 kg; lognormal variance with pedigree 0.5, pedigree (1,1,5,1,4)
  (same comment as for Aluminium III)
- Carbon monoxide, non-fossil [air, non-urban air or from high stacks]: 1.55e-5 kg; lognormal variance with pedigree 0.8, pedigree (1,1,5,1,4)
  (same comment as for Aluminium III)
- Carbon monoxide, non-fossil [air, urban air close to ground]: 6.23e-6 kg; lognormal variance with pedigree 0.51, pedigree (1,1,5,1,4)
  (same comment as for Aluminium III)
- Chromium III [air, non-urban air or from high stacks]: 1.11e-11 kg; lognormal variance with pedigree 2.89, pedigree (1,1,5,1,4)
  (same comment as for Aluminium III)
- Chromium III [air, urban air close to ground]: 1.62e-15 kg; lognormal variance with pedigree 1.92, pedigree (1,1,5,1,4)
  (same comment as for Aluminium III)
- Cobalt II [air, non-urban air or from high stacks]: 1.6e-11 kg; lognormal variance with pedigree 2.84, pedigree (1,1,5,1,4)
  (same comment as for Aluminium III)
- Cobalt II [air, urban air close to ground]: 9.99e-16 kg; lognormal variance with pedigree 1.94, pedigree (1,1,5,1,4)
  (same comment as for Aluminium III)
- Copper ion [air, non-urban air or from high stacks]: 2.3e-11 kg; lognormal variance with pedigree 2.8, pedigree (1,1,5,1,4)
  (same comment as for Aluminium III)
- Copper ion [air, urban air close to ground]: 4.4e-13 kg; lognormal variance with pedigree 1.8, pedigree (1,1,5,1,4)
  (same comment as for Aluminium III)
- Cyanide [air, urban air close to ground]: 6.36e-8 kg; lognormal variance with pedigree 0.5, pedigree (1,1,5,1,4)
  (same comment as for Aluminium III)
- Dinitrogen monoxide [air, urban air close to ground]: 6.23e-6 kg; lognormal variance with pedigree 0.36, pedigree (1,1,5,1,4)
  (same comment as for Aluminium III)
- Hydrochloric acid [air, non-urban air or from high stacks]: 1.8e-5 kg; lognormal variance with pedigree 1.03, pedigree (1,1,5,1,4)
  (same comment as for Aluminium III)
- Hydrogen fluoride [air, non-urban air or from high stacks]: 2.1e-6 kg; lognormal variance with pedigree 1.38, pedigree (1,1,5,1,4)
  (same comment as for Aluminium III)
- Iron ion [air, non-urban air or from high stacks]: 1.1e-9 kg; lognormal variance with pedigree 2.29, pedigree (1,1,5,1,4)
  (same comment as for Aluminium III)
- Iron ion [air, urban air close to ground]: 2.99e-10 kg; lognormal variance with pedigree 1.09, pedigree (1,1,5,1,4)
  (same comment as for Aluminium III)
- Lead II [air, non-urban air or from high stacks]: 4.26e-11 kg; lognormal variance with pedigree 2.71, pedigree (1,1,5,1,4)
  (same comment as for Aluminium III)
- Lead II [air, urban air close to ground]: 4.23e-12 kg; lognormal variance with pedigree 1.72, pedigree (1,1,5,1,4)
  (same comment as for Aluminium III)
- Magnesium [air, non-urban air or from high stacks]: 1.79e-7 kg; lognormal variance with pedigree 1.62, pedigree (1,1,5,1,4)
  (same comment as for Aluminium III)
- Magnesium [air, urban air close to ground]: 9.67e-8 kg; lognormal variance with pedigree 0.66, pedigree (1,1,5,1,4)
  (same comment as for Aluminium III)
- Manganese II [air, non-urban air or from high stacks]: 3.11e-9 kg; lognormal variance with pedigree 2.15, pedigree (1,1,5,1,4)
  (same comment as for Aluminium III)
- Manganese II [air, urban air close to ground]: 3.34e-14 kg; lognormal variance with pedigree 1.34, pedigree (1,1,5,1,4)
  (same comment as for Aluminium III)
- Mercury II [air, non-urban air or from high stacks]: 1.03e-9 kg; lognormal variance with pedigree 2.3, pedigree (1,1,5,1,4)
  (same comment as for Aluminium III)
- Mercury II [air, urban air close to ground]: 4.35e-15 kg; lognormal variance with pedigree 2.25, pedigree (1,1,5,1,4)
  (same comment as for Aluminium III)
- Methane, non-fossil [air, non-urban air or from high stacks]: 0.0419 kg; lognormal variance with pedigree 0.19, pedigree (1,1,5,1,4)
  (same comment as for Aluminium III)
- Methane, non-fossil [air, urban air close to ground]: 1.79e-5 kg; lognormal variance with pedigree 0.55, pedigree (1,1,5,1,4)
  (same comment as for Aluminium III)
- Molybdenum VI [air, non-urban air or from high stacks]: 3.06e-11 kg; lognormal variance with pedigree 2.76, pedigree (1,1,5,1,4)
  (same comment as for Aluminium III)
- Molybdenum VI [air, urban air close to ground]: 1.21e-10 kg; lognormal variance with pedigree 1.74, pedigree (1,1,5,1,4)
  (same comment as for Aluminium III)
- NMVOC, non-methane volatile organic compounds [air, non-urban air or from high stacks]: 2.93e-7 kg; lognormal variance with pedigree 0.19, pedigree (1,1,5,1,4)
  (same comment as for Aluminium III)
- NMVOC, non-methane volatile organic compounds [air, urban air close to ground]: 8.11e-8 kg; lognormal variance with pedigree 0.67, pedigree (1,1,5,1,4)
  (same comment as for Aluminium III)
- Nickel II [air, non-urban air or from high stacks]: 3.71e-11 kg; lognormal variance with pedigree 2.74, pedigree (1,1,5,1,4)
  (same comment as for Aluminium III)
- Nickel II [air, urban air close to ground]: 2.52e-15 kg; lognormal variance with pedigree 1.78, pedigree (1,1,5,1,4)
  (same comment as for Aluminium III)
- Nitrogen oxides [air, non-urban air or from high stacks]: 6.54e-7 kg; lognormal variance with pedigree 0.81, pedigree (1,1,5,1,4)
  (same comment as for Aluminium III)
- Nitrogen oxides [air, urban air close to ground]: 2.21e-5 kg; lognormal variance with pedigree 0.4, pedigree (1,1,5,1,4)
  (same comment as for Aluminium III)
- Particulate Matter, < 2.5 um [air, non-urban air or from high stacks]: 5.2e-6 kg; lognormal variance with pedigree 0.45, pedigree (1,1,5,1,4)
  (same comment as for Aluminium III)
- Phosphorus [air, urban air close to ground]: 1.08e-9 kg; lognormal variance with pedigree 1.38, pedigree (1,1,5,1,4)
  (same comment as for Aluminium III)
- Potassium I [air, non-urban air or from high stacks]: 6.55e-8 kg; lognormal variance with pedigree 1.75, pedigree (1,1,5,1,4)
  (same comment as for Aluminium III)
- Selenium IV [air, non-urban air or from high stacks]: 1.84e-11 kg; lognormal variance with pedigree 2.83, pedigree (1,1,5,1,4)
  (same comment as for Aluminium III)
- Selenium IV [air, urban air close to ground]: 1.82e-16 kg; lognormal variance with pedigree 1.91, pedigree (1,1,5,1,4)
  (same comment as for Aluminium III)
- Silicon [air, non-urban air or from high stacks]: 7.17e-8 kg; lognormal variance with pedigree 1.76, pedigree (1,1,5,1,4)
  (same comment as for Aluminium III)
- Silicon [air, urban air close to ground]: 6.28e-7 kg; lognormal variance with pedigree 0.73, pedigree (1,1,5,1,4)
  (same comment as for Aluminium III)
- Silver I [air, non-urban air or from high stacks]: 1.8e-14 kg; lognormal variance with pedigree 3.69, pedigree (1,1,5,1,4)
  (same comment as for Aluminium III)
- Silver I [air, urban air close to ground]: 6.07e-16 kg; lognormal variance with pedigree 2.69, pedigree (1,1,5,1,4)
  (same comment as for Aluminium III)
- Sodium [air, non-urban air or from high stacks]: 2.3e-7 kg; lognormal variance with pedigree 1.58, pedigree (1,1,5,1,4)
  (same comment as for Aluminium III)
- Strontium [air, non-urban air or from high stacks]: 2.29e-10 kg; lognormal variance with pedigree 2.5, pedigree (1,1,5,1,4)
  (same comment as for Aluminium III)
- Strontium [air, urban air close to ground]: 4.51e-11 kg; lognormal variance with pedigree 1.47, pedigree (1,1,5,1,4)
  (same comment as for Aluminium III)
- Sulfur dioxide [air, non-urban air or from high stacks]: 4.96e-5 kg; lognormal variance with pedigree 0.99, pedigree (1,1,5,1,4)
  (same comment as for Aluminium III)
- Thallium I [air, non-urban air or from high stacks]: 6.75e-12 kg; lognormal variance with pedigree 2.96, pedigree (1,1,5,1,4)
  (same comment as for Aluminium III)
- Thallium I [air, urban air close to ground]: 1.33e-11 kg; lognormal variance with pedigree 1.93, pedigree (1,1,5,1,4)
  (same comment as for Aluminium III)
- Titanium ion [air, non-urban air or from high stacks]: 5.8e-10 kg; lognormal variance with pedigree 2.38, pedigree (1,1,5,1,4)
  (same comment as for Aluminium III)
- Titanium ion [air, urban air close to ground]: 1.14e-9 kg; lognormal variance with pedigree 1.34, pedigree (1,1,5,1,4)
  (same comment as for Aluminium III)
- Zinc II [air, non-urban air or from high stacks]: 3.55e-10 kg; lognormal variance with pedigree 2.44, pedigree (1,1,5,1,4)
  (same comment as for Aluminium III)
- Zinc II [air, urban air close to ground]: 1.8e-11 kg; lognormal variance with pedigree 1.42, pedigree (1,1,5,1,4)
  (same comment as for Aluminium III)
- Aluminium III [water, ground-, long-term]: 0.0123 kg; lognormal variance with pedigree 0.42, pedigree (1,1,5,1,4)
  Emissions from long-term leachate (>100a) directly from MSW landfill and indirectly via incineration of treatement sludge from leachate treatement. Uncertainty calculated depending on waste input and uncertainty of long-term transfer coefficents in landfill.
- Aluminium III [water, surface water]: 1e-5 kg; lognormal variance with pedigree 0.76, pedigree (1,1,5,1,4)
  (same comment as for Aluminium III)
- Ammonium [water, ground-, long-term]: 0.000499 kg; lognormal variance with pedigree 0.59, pedigree (1,1,5,1,4)
  (same comment as for Aluminium III)
- Ammonium [water, surface water]: 0.00123 kg; lognormal variance with pedigree 0.42, pedigree (1,1,5,1,4)
  (same comment as for Aluminium III)
- Antimony ion [water, ground-, long-term]: 7.55e-8 kg; lognormal variance with pedigree 2.94, pedigree (1,1,5,1,4)
  (same comment as for Aluminium III)
- Antimony ion [water, surface water]: 1.37e-8 kg; lognormal variance with pedigree 1.94, pedigree (1,1,5,1,4)
  (same comment as for Aluminium III)
- Arsenic ion [water, ground-, long-term]: 1.96e-6 kg; lognormal variance with pedigree 1.55, pedigree (1,1,5,1,4)
  (same comment as for Aluminium III)
- Arsenic ion [water, surface water]: 8.75e-8 kg; lognormal variance with pedigree 1.74, pedigree (1,1,5,1,4)
  (same comment as for Aluminium III)
- BOD5, Biological Oxygen Demand [water, ground-, long-term]: 0.0196 kg; lognormal variance with pedigree 0.66, pedigree (1,1,5,1,4)
  (same comment as for Aluminium III)
- BOD5, Biological Oxygen Demand [water, surface water]: 0.000631 kg; lognormal variance with pedigree 0.5, pedigree (1,1,5,1,4)
  (same comment as for Aluminium III)
- Barium II [water, ground-, long-term]: 0.000108 kg; lognormal variance with pedigree 0.76, pedigree (1,1,5,1,4)
  (same comment as for Aluminium III)
- Barium II [water, surface water]: 2.12e-6 kg; lognormal variance with pedigree 1.09, pedigree (1,1,5,1,4)
  (same comment as for Aluminium III)
- Beryllium II [water, ground-, long-term]: 9.65e-7 kg; lognormal variance with pedigree 1.64, pedigree (1,1,5,1,4)
  (same comment as for Aluminium III)
- Beryllium II [water, surface water]: 7.76e-9 kg; lognormal variance with pedigree 1.97, pedigree (1,1,5,1,4)
  (same comment as for Aluminium III)
- Boron [water, ground-, long-term]: 5.58e-6 kg; lognormal variance with pedigree 1.3, pedigree (1,1,5,1,4)
  (same comment as for Aluminium III)
- Boron [water, surface water]: 1e-5 kg; lognormal variance with pedigree 1.28, pedigree (1,1,5,1,4)
  (same comment as for Aluminium III)
- COD, Chemical Oxygen Demand [water, ground-, long-term]: 0.0827 kg; lognormal variance with pedigree 0.66, pedigree (1,1,5,1,4)
  (same comment as for Aluminium III)
- COD, Chemical Oxygen Demand [water, surface water]: 0.002 kg; lognormal variance with pedigree 0.5, pedigree (1,1,5,1,4)
  (same comment as for Aluminium III)
- Cadmium II [water, ground-, long-term]: 1.58e-6 kg; lognormal variance with pedigree 1.59, pedigree (1,1,5,1,4)
  (same comment as for Aluminium III)
- Cadmium II [water, surface water]: 4.01e-8 kg; lognormal variance with pedigree 1.77, pedigree (1,1,5,1,4)
  (same comment as for Aluminium III)
- Calcium II [water, ground-, long-term]: 0.00333 kg; lognormal variance with pedigree 0.58, pedigree (1,1,5,1,4)
  (same comment as for Aluminium III)
- Calcium II [water, surface water]: 0.000109 kg; lognormal variance with pedigree 0.8, pedigree (1,1,5,1,4)
  (same comment as for Aluminium III)
- Chloride [water, ground-, long-term]: 0.000571 kg; lognormal variance with pedigree 0.68, pedigree (1,1,5,1,4)
  (same comment as for Aluminium III)
- Chloride [water, surface water]: 0.00126 kg; lognormal variance with pedigree 0.66, pedigree (1,1,5,1,4)
  Emissions from short-term leachate treatment. Uncertainty calculated depending on waste input and uncertainty of transfer coefficents in landfill and wastewater treatment.
- Chromium III [water, surface water]: 6.99e-11 kg; lognormal variance with pedigree 1.84, pedigree (1,1,5,1,4)
  (same comment as for Aluminium III)
- Chromium VI [water, ground-, long-term]: 6.76e-8 kg; lognormal variance with pedigree 8.58, pedigree (1,1,5,1,4)
  (same comment as for Aluminium III)
- Chromium VI [water, surface water]: 2.33e-8 kg; lognormal variance with pedigree 1.81, pedigree (1,1,5,1,4)
  (same comment as for Aluminium III)
- Cobalt II [water, ground-, long-term]: 7e-7 kg; lognormal variance with pedigree 1.62, pedigree (1,1,5,1,4)
  (same comment as for Aluminium III)
- Cobalt II [water, surface water]: 3.24e-8 kg; lognormal variance with pedigree 1.82, pedigree (1,1,5,1,4)
  (same comment as for Aluminium III)
- Copper ion [water, ground-, long-term]: 6.09e-5 kg; lognormal variance with pedigree 1.11, pedigree (1,1,5,1,4)
  (same comment as for Aluminium III)
- Copper ion [water, surface water]: 2.09e-8 kg; lognormal variance with pedigree 1.72, pedigree (1,1,5,1,4)
  (same comment as for Aluminium III)
- DOC, Dissolved Organic Carbon [water, ground-, long-term]: 0.0756 kg; lognormal variance with pedigree 0.66, pedigree (1,1,5,1,4)
  (same comment as for Aluminium III)
- DOC, Dissolved Organic Carbon [water, surface water]: 0.000487 kg; lognormal variance with pedigree 0.5, pedigree (1,1,5,1,4)
  (same comment as for Aluminium III)
- Fluoride [water, ground-, long-term]: 1.71e-5 kg; lognormal variance with pedigree 1.26, pedigree (1,1,5,1,4)
  (same comment as for Aluminium III)
- Fluoride [water, surface water]: 3.86e-7 kg; lognormal variance with pedigree 1.55, pedigree (1,1,5,1,4)
  (same comment as for Chloride)
- Hydrogen sulfide [water, ground-, long-term]: 9.04e-5 kg; lognormal variance with pedigree 0.7, pedigree (1,1,5,1,4)
  (same comment as for Aluminium III)
- Iron ion [water, ground-, long-term]: 8.71e-5 kg; lognormal variance with pedigree 2.41, pedigree (1,1,5,1,4)
  (same comment as for Aluminium III)
- Iron ion [water, surface water]: 2.24e-6 kg; lognormal variance with pedigree 1.2, pedigree (1,1,5,1,4)
  (same comment as for Aluminium III)
- Lead II [water, ground-, long-term]: 8.03e-5 kg; lognormal variance with pedigree 1.08, pedigree (1,1,5,1,4)
  (same comment as for Aluminium III)
- Lead II [water, surface water]: 1.41e-8 kg; lognormal variance with pedigree 1.66, pedigree (1,1,5,1,4)
  (same comment as for Aluminium III)
- Magnesium [water, ground-, long-term]: 0.00365 kg; lognormal variance with pedigree 0.54, pedigree (1,1,5,1,4)
  (same comment as for Aluminium III)
- Magnesium [water, surface water]: 0.000646 kg; lognormal variance with pedigree 0.63, pedigree (1,1,5,1,4)
  (same comment as for Aluminium III)
- Manganese II [water, ground-, long-term]: 3.24e-5 kg; lognormal variance with pedigree 0.96, pedigree (1,1,5,1,4)
  (same comment as for Aluminium III)
- Manganese II [water, surface water]: 6.31e-6 kg; lognormal variance with pedigree 1.2, pedigree (1,1,5,1,4)
  (same comment as for Aluminium III)
- Mercury II [water, ground-, long-term]: 1.36e-7 kg; lognormal variance with pedigree 1.9, pedigree (1,1,5,1,4)
  (same comment as for Aluminium III)
- Mercury II [water, surface water]: 8.14e-10 kg; lognormal variance with pedigree 2.2, pedigree (1,1,5,1,4)
  (same comment as for Aluminium III)
- Molybdenum VI [water, ground-, long-term]: 1.7e-6 kg; lognormal variance with pedigree 1.63, pedigree (1,1,5,1,4)
  (same comment as for Aluminium III)
- Molybdenum VI [water, surface water]: 7.24e-8 kg; lognormal variance with pedigree 1.7, pedigree (1,1,5,1,4)
  (same comment as for Aluminium III)
- Nickel II [water, ground-, long-term]: 9.35e-6 kg; lognormal variance with pedigree 1.35, pedigree (1,1,5,1,4)
  (same comment as for Aluminium III)
- Nickel II [water, surface water]: 8.99e-8 kg; lognormal variance with pedigree 1.66, pedigree (1,1,5,1,4)
  (same comment as for Aluminium III)
- Nitrate [water, ground-, long-term]: 5.5e-5 kg; lognormal variance with pedigree 0.56, pedigree (1,1,5,1,4)
  (same comment as for Aluminium III)
- Nitrate [water, surface water]: 0.00447 kg; lognormal variance with pedigree 0.37, pedigree (1,1,5,1,4)
  (same comment as for Aluminium III)
- Nitrite [water, ground-, long-term]: 2.71e-5 kg; lognormal variance with pedigree 0.59, pedigree (1,1,5,1,4)
  (same comment as for Aluminium III)
- Nitrite [water, surface water]: 2.58e-5 kg; lognormal variance with pedigree 0.57, pedigree (1,1,5,1,4)
  (same comment as for Aluminium III)
- Nitrogen [water, surface water]: 3.33e-5 kg; lognormal variance with pedigree 0.39, pedigree (1,1,5,1,4)
  (same comment as for Aluminium III)
- Nitrogen, organic bound [water, ground-, long-term]: 0.000815 kg; lognormal variance with pedigree 0.59, pedigree (1,1,5,1,4)
  (same comment as for Aluminium III)
- Phosphate [water, ground-, long-term]: 2.43e-6 kg; lognormal variance with pedigree 7.25, pedigree (1,1,5,1,4)
  (same comment as for Aluminium III)
- Phosphate [water, surface water]: 1.84e-6 kg; lognormal variance with pedigree 1.34, pedigree (1,1,5,1,4)
  (same comment as for Aluminium III)
- Potassium I [water, ground-, long-term]: 0.00107 kg; lognormal variance with pedigree 0.7, pedigree (1,1,5,1,4)
  (same comment as for Aluminium III)
- Potassium I [water, surface water]: 0.000262 kg; lognormal variance with pedigree 0.77, pedigree (1,1,5,1,4)
  (same comment as for Chloride)
- Selenium IV [water, ground-, long-term]: 7.31e-7 kg; lognormal variance with pedigree 1.89, pedigree (1,1,5,1,4)
  (same comment as for Aluminium III)
- Selenium IV [water, surface water]: 4.9e-8 kg; lognormal variance with pedigree 1.77, pedigree (1,1,5,1,4)
  (same comment as for Aluminium III)
- Silicon [water, ground-, long-term]: 0.000425 kg; lognormal variance with pedigree 4.13, pedigree (1,1,5,1,4)
  (same comment as for Aluminium III)
- Silicon [water, surface water]: 1.73e-5 kg; lognormal variance with pedigree 0.71, pedigree (1,1,5,1,4)
  (same comment as for Aluminium III)
- Silver I [water, ground-, long-term]: 4.77e-8 kg; lognormal variance with pedigree 2, pedigree (1,1,5,1,4)
  (same comment as for Aluminium III)
- Silver I [water, surface water]: 1.64e-11 kg; lognormal variance with pedigree 2.62, pedigree (1,1,5,1,4)
  (same comment as for Aluminium III)
- Sodium I [water, ground-, long-term]: 9.19e-13 kg; lognormal variance with pedigree 2.67, pedigree (1,1,5,1,4)
  (same comment as for Aluminium III)
- Sodium I [water, surface water]: 0.000919 kg; lognormal variance with pedigree 0.75, pedigree (1,1,5,1,4)
  (same comment as for Chloride)
- Strontium [water, ground-, long-term]: 5.78e-5 kg; lognormal variance with pedigree 1.1, pedigree (1,1,5,1,4)
  (same comment as for Aluminium III)
- Strontium [water, surface water]: 4.65e-7 kg; lognormal variance with pedigree 1.43, pedigree (1,1,5,1,4)
  (same comment as for Aluminium III)
- Sulfate [water, ground-, long-term]: 0.00347 kg; lognormal variance with pedigree 0.7, pedigree (1,1,5,1,4)
  (same comment as for Aluminium III)
- Sulfate [water, surface water]: 0.000439 kg; lognormal variance with pedigree 0.79, pedigree (1,1,5,1,4)
  (same comment as for Chloride)
- TOC, Total Organic Carbon [water, ground-, long-term]: 0.0756 kg; lognormal variance with pedigree 0.66, pedigree (1,1,5,1,4)
  (same comment as for Aluminium III)
- TOC, Total Organic Carbon [water, surface water]: 0.000507 kg; lognormal variance with pedigree 0.5, pedigree (1,1,5,1,4)
  (same comment as for Aluminium III)
- Thallium I [water, ground-, long-term]: 1.7e-6 kg; lognormal variance with pedigree 1.57, pedigree (1,1,5,1,4)
  (same comment as for Aluminium III)
- Thallium I [water, surface water]: 1.37e-8 kg; lognormal variance with pedigree 1.9, pedigree (1,1,5,1,4)
  (same comment as for Aluminium III)
- Titanium ion [water, ground-, long-term]: 0.00017 kg; lognormal variance with pedigree 0.97, pedigree (1,1,5,1,4)
  (same comment as for Aluminium III)
- Titanium ion [water, surface water]: 1.18e-6 kg; lognormal variance with pedigree 1.3, pedigree (1,1,5,1,4)
  (same comment as for Aluminium III)
- Zinc II [water, ground-, long-term]: 0.000102 kg; lognormal variance with pedigree 1.02, pedigree (1,1,5,1,4)
  (same comment as for Aluminium III)
- Zinc II [water, surface water]: 4.94e-7 kg; lognormal variance with pedigree 1.35, pedigree (1,1,5,1,4)
  (same comment as for Aluminium III)

## Sampling procedure
Landfill model based on observed leachate concentrations in literature. Extrapolated to 60'000 years heeding chemical characteristics. Initial waste composition from various literature sources.

## Extrapolations
Copied directly (no extrapolation) from a dataset on 'average paper'. Uncertainty adjusted accordingly.

## Review by Niels Jungbluth 2003-08-30
Passed. Calculation for standard deviation 95 of, i.e., infrastructure,
land occupation, transport services or other services can differ from
standard Pedigree approach used in this project and figures obtained by
this procedure.

## Review by Emilia Moreno Ruiz 2012-11-30
Legacy link converted in Activity link
