# treatment of waste wood, untreated, open burning

Dataset: EcoSpold 2, unit process
Geography: GLO
Time period: 2006-01-01 to 2022-12-31
Technology level: current
Classification: ISIC rev.4 ecoinvent: 3821:Treatment and disposal of non-hazardous waste
Synonyms: open, uncontrolled burning
Scenario: Business-as-Usual
System model: Allocation at the point of substitution
Share of production covered: 1 %
Generated by: Avraam Symeonidis
Database: ecoinvent
isCopyrightProtected: true

## General comment
This dataset represents the activity of waste disposal of waste wood, untreated in uncontrolled, open burning. Recommended use of this dataset: For untreated waste wood, which goes to disposal as part of unmanaged communal waste mixture.Waste composition (wet, in ppm): upper heating value 15.36 MJ/kg; lower heating value 13.99 MJ/kg; H2O 174080; O 372180; H 50163; C 401470; S 125.51; N 986.98; P 108.97; B 2.1107; Cl 330.95; Br n.a.; F 21.106; I n.a.; Ag n.a.; As 0.42213; Ba n.a.; Cd 0.20051; Co 0.086772; Cr 0.65782; Cu 4.1482; Hg 0.31976; Mn 53.118; Mo 0.8302; Ni 0.55581; Pb 27.868; Sb n.a.; Se n.a.; Sn n.a.; V n.a.; Zn 17.807; Be n.a.; Sc n.a.; Sr n.a.; Ti n.a.; Tl n.a.; W n.a.; Si n.a.; Fe 15.479; Ca 130.89; Al 6.3322; K 65.412; Mg 197.56; Na 14.071; . Share of carbon in waste that is biogenic 100%. // Recycling rates for metallic iron = 0% for metallic aluminium = 0% for metallic copper = 0% . A mass of 0.00757kg residues are left on ground.

## Included activities start
open burning starting from waste placement on burning site (without transports to the site)

## Included activities end
Waste-specific emissions to air and soil from open burning.

## Geography
Generic open burning without any geographical distinction.

## Technology
This is an inventory for open burning of solid waste. Informal or uncontrolled burning. No flue gas treatment. Suitable for informal recycling (e.g. burning of e-waste). Based on Municipal waste incineration without any pollution control. Residues (minus any actually recycled metals) are left on site. Assumption of share of thermal NOx to total NOx in average waste burning process is 30%. Contribution from thermal NOx is 810mg per kg waste. Recycling rates for metallic iron = 0% for metallic aluminium = 0% for metallic copper = 0% .

## Time period
generic open burning without any temporal distinction

## Reference product
- waste wood, untreated: -1 kg; By-product classification Waste; CPC 3928: Sawdust and wood waste and scrap
  main reference product of this activity (supply of disposal service).
  production volume 1 kg
    The amount of the annual production volume is a placeholder value. The contribution of this technology to the different local markets can be found in the markets themselves.
  property heating value, net 13.99 MJ
    Value taken from the general comment of the treatment dataset.
  property price 0 EUR2005
    Waste products are assigned a price of zero as they are assumed to require further treatment.
  properties: aluminium content 7.6668e-6, arsenic content 5.111e-7, boron content 2.5556e-6, cadmium content 2.4277e-7, calcium content 0.00015848, carbon allocation 0.401463 kg, carbon content 0.48608, carbon content, non-fossil 0.48608, chlorine content 0.0004007, chromium content 7.9647e-7, cobalt content 1.0506e-7, copper content 5.0225e-6, dry mass 0.82592 kg, fluorine content 2.5555e-5, heating value, gross 15.365 MJ, hydrogen content 0.060736, iron content 1.8741e-5, lead content 3.3741e-5, magnesium content 0.0002392, manganese content 6.4314e-5, mercury content 3.8716e-7, molybdenum content 1.0052e-6, nickel content 6.7295e-7, nitrogen content 0.001195, oxygen content 0.45062, phosphorus content 0.00013193, potassium content 7.9199e-5, sodium content 1.7037e-5, sulfur content 0.00015197, water content 0.21077, water in wet mass 0.17408 kg, wet mass 1 kg, zinc content 2.156e-5

## Inputs from nature
- Oxygen [natural resource, in air]: 1.0919 kg; lognormal variance with pedigree 0.054479, pedigree (1,1,4,1,1)
  oxygen from ambient air needed to combust and oxidise this waste. Net demand, i.e. without air O2 leaving the process uncombusted.
  Uncertainty: uncertainty is calculated from uncertainties in waste composition and transfer coefficients to flue gas and soild residues

## Emissions to nature
- Acetaldehyde [air, urban air close to ground]: 0.0004284 kg; lognormal variance with pedigree 0.0491, pedigree (1,1,4,1,1)
  Process-specific (constant) emissions to air from open burning.
  Uncertainty: uncertainty generic estimate
- Aluminium III [air, urban air close to ground]: 5.2195e-9 kg; lognormal variance with pedigree 1.4436, pedigree (1,1,4,1,1)
  Emissions to air from open burning.
  Uncertainty: Uncertainty calculated depending on waste input and uncertainty of transfer coefficents in incineration model.
- Arsenic ion [air, urban air close to ground]: 3.5978e-9 kg; lognormal variance with pedigree 1.7421, pedigree (1,1,4,1,1)
  (same comment as for Aluminium III)
- Benzene [air, urban air close to ground]: 0.00097975 kg; lognormal variance with pedigree 0.0491, pedigree (1,1,4,1,1)
  (same comment as for Acetaldehyde)
- Benzene, ethyl- [air, urban air close to ground]: 0.00032746 kg; lognormal variance with pedigree 0.0491, pedigree (1,1,4,1,1)
  (same comment as for Acetaldehyde)
- Boron [air, urban air close to ground]: 8.442e-10 kg; lognormal variance with pedigree 1.6068, pedigree (1,1,4,1,1)
  (same comment as for Aluminium III)
- Cadmium II [air, urban air close to ground]: 1.1345e-9 kg; lognormal variance with pedigree 1.8457, pedigree (1,1,4,1,1)
  (same comment as for Aluminium III)
- Calcium [air, urban air close to ground]: 3.0902e-6 kg; lognormal variance with pedigree 0.96884, pedigree (1,1,4,1,1)
  (same comment as for Aluminium III)
- Carbon dioxide, non-fossil [air, urban air close to ground]: 1.3878 kg; lognormal variance with pedigree 0.033629, pedigree (1,1,4,1,1)
  Emissions to air from open burning.
  Uncertainty: Uncertainty calculated depending on waste input, uncertainty of transfer coefficents in incineration model,and uncertainty in CO and CH4 emissions.
- Carbon monoxide, non-fossil [air, urban air close to ground]: 0.0386 kg; lognormal variance with pedigree 0.65557, pedigree (1,1,4,1,1)
  (same comment as for Acetaldehyde)
- Chromium III [air, urban air close to ground]: 9.8093e-10 kg; lognormal variance with pedigree 1.724, pedigree (1,1,4,1,1)
  (same comment as for Aluminium III)
- Cobalt II [air, urban air close to ground]: 3.4998e-9 kg; lognormal variance with pedigree 1.9559, pedigree (1,1,4,1,1)
  (same comment as for Aluminium III)
- Copper ion [air, urban air close to ground]: 4.5592e-9 kg; lognormal variance with pedigree 1.4919, pedigree (1,1,4,1,1)
  (same comment as for Aluminium III)
- Dinitrogen monoxide [air, urban air close to ground]: 0.00011625 kg; lognormal variance with pedigree 0.0491, pedigree (1,1,4,1,1)
  (same comment as for Aluminium III)
- Dioxins, measured as 2,3,7,8-tetrachlorodibenzo-p-dioxin [air, urban air close to ground]: 3.1183e-12 kg; lognormal variance with pedigree 1.2915, pedigree (1,1,4,1,1)
  Process-specific (constant) emissions to air from open burning.
  Uncertainty: Uncertainty calculated from uncetainty in Chlorine content in waste and estimation formula
- Formaldehyde [air, urban air close to ground]: 0.00044365 kg; lognormal variance with pedigree 0.0491, pedigree (1,1,4,1,1)
  (same comment as for Acetaldehyde)
- Hydrochloric acid [air, urban air close to ground]: 0.00022701 kg; lognormal variance with pedigree 0.81152, pedigree (1,1,4,1,1)
  (same comment as for Aluminium III)
- Hydrogen fluoride [air, urban air close to ground]: 2.3686e-6 kg; lognormal variance with pedigree 1.1903, pedigree (1,1,4,1,1)
  (same comment as for Aluminium III)
- Iron ion [air, urban air close to ground]: 2.8045e-8 kg; lognormal variance with pedigree 1.3058, pedigree (1,1,4,1,1)
  (same comment as for Aluminium III)
- Lead II [air, urban air close to ground]: 2.3418e-7 kg; lognormal variance with pedigree 1.1938, pedigree (1,1,4,1,1)
  (same comment as for Aluminium III)
- Magnesium [air, urban air close to ground]: 5.9186e-7 kg; lognormal variance with pedigree 0.9554, pedigree (1,1,4,1,1)
  (same comment as for Aluminium III)
- Manganese II [air, urban air close to ground]: 4.5215e-7 kg; lognormal variance with pedigree 1.1078, pedigree (1,1,4,1,1)
  (same comment as for Aluminium III)
- Mercury II [air, urban air close to ground]: 1.938e-7 kg; lognormal variance with pedigree 1.7249, pedigree (1,1,4,1,1)
  (same comment as for Aluminium III)
- Methane, non-fossil [air, urban air close to ground]: 0.0059 kg; lognormal variance with pedigree 0.0491, pedigree (1,1,4,1,1)
  (same comment as for Acetaldehyde)
- Molybdenum VI [air, urban air close to ground]: 4.1442e-9 kg; lognormal variance with pedigree 1.6661, pedigree (1,1,4,1,1)
  (same comment as for Aluminium III)
- Nickel II [air, urban air close to ground]: 7.9296e-10 kg; lognormal variance with pedigree 1.7468, pedigree (1,1,4,1,1)
  (same comment as for Aluminium III)
- Nitrogen oxides [air, urban air close to ground]: 0.0020102 kg; lognormal variance with pedigree 0.37018, pedigree (1,1,4,1,1)
  (same comment as for Aluminium III)
- PAH, polycyclic aromatic hydrocarbons [air, urban air close to ground]: 0.0003443 kg; lognormal variance with pedigree 0.30974, pedigree (1,1,4,1,1)
  (same comment as for Acetaldehyde)
- Particulate Matter, < 2.5 um [air, urban air close to ground]: 0.00017394 kg; lognormal variance with pedigree 0.75875, pedigree (1,1,4,1,1)
  (same comment as for Aluminium III)
- Particulate Matter, > 10 um [air, urban air close to ground]: 6.6902e-5 kg; lognormal variance with pedigree 0.75875, pedigree (1,1,4,1,1)
  (same comment as for Aluminium III)
- Particulate Matter, > 2.5 um and < 10um [air, urban air close to ground]: 9.3662e-5 kg; lognormal variance with pedigree 0.75875, pedigree (1,1,4,1,1)
  (same comment as for Aluminium III)
- Phenol [air, urban air close to ground]: 1.4799e-5 kg; lognormal variance with pedigree 0.0491, pedigree (1,1,4,1,1)
  (same comment as for Acetaldehyde)
- Phosphorus [air, urban air close to ground]: 7.4867e-7 kg; lognormal variance with pedigree 1.0165, pedigree (1,1,4,1,1)
  (same comment as for Aluminium III)
- Polychlorinated biphenyls [air, urban air close to ground]: 1.1189e-7 kg; lognormal variance with pedigree 0.0491, pedigree (1,1,4,1,1)
  (same comment as for Acetaldehyde)
- Potassium I [air, urban air close to ground]: 9.6951e-7 kg; lognormal variance with pedigree 1.0694, pedigree (1,1,4,1,1)
  (same comment as for Aluminium III)
- Sodium [air, urban air close to ground]: 3.4659e-7 kg; lognormal variance with pedigree 1.2646, pedigree (1,1,4,1,1)
  (same comment as for Aluminium III)
- Styrene [air, urban air close to ground]: 0.0005275 kg; lognormal variance with pedigree 0.0491, pedigree (1,1,4,1,1)
  (same comment as for Acetaldehyde)
- Sulfur dioxide [air, urban air close to ground]: 5.4058e-5 kg; lognormal variance with pedigree 0.94993, pedigree (1,1,4,1,1)
  (same comment as for Aluminium III)
- Toluene [air, urban air close to ground]: 0.000372 kg; lognormal variance with pedigree 0.0491, pedigree (1,1,4,1,1)
  (same comment as for Acetaldehyde)
- Water [air, urban air close to ground]: 0.00057538 m3; lognormal variance with pedigree 0.11255, pedigree (1,1,4,1,1)
  water vapour from waste humidity, hydrogen oxidation.
  Uncertainty: Uncertainty calculated from uncertainty in waste composition and the uncertainty of fraction to air.
- Zinc II [air, urban air close to ground]: 1.3248e-7 kg; lognormal variance with pedigree 1.2557, pedigree (1,1,4,1,1)
  (same comment as for Aluminium III)
- Aluminium III [soil, industrial]: 6.3269e-6 kg; lognormal variance with pedigree 1.3362, pedigree (1,1,4,1,1)
  Emissions from open burning to residues left on ground.
  Uncertainty: Uncertainty calculated depending on waste input and uncertainty of transfer coefficents in incineration model.
- Arsenic ion [soil, industrial]: 4.1853e-7 kg; lognormal variance with pedigree 1.6886, pedigree (1,1,4,1,1)
  (same comment as for Aluminium III)
- Boron [soil, industrial]: 2.1099e-6 kg; lognormal variance with pedigree 1.4803, pedigree (1,1,4,1,1)
  (same comment as for Aluminium III)
- Cadmium II [soil, industrial]: 1.9938e-7 kg; lognormal variance with pedigree 1.7837, pedigree (1,1,4,1,1)
  (same comment as for Aluminium III)
- Calcium [soil, industrial]: 0.0001278 kg; lognormal variance with pedigree 0.93421, pedigree (1,1,4,1,1)
  (same comment as for Aluminium III)
- Carbon [soil, industrial]: 0.0020134 kg; lognormal variance with pedigree 0.095859, pedigree (1,1,4,1,1)
  (same comment as for Aluminium III)
- Chloride [soil, industrial]: 0.00011017 kg; lognormal variance with pedigree 0.81445, pedigree (1,1,4,1,1)
  (same comment as for Aluminium III)
- Chromium III [soil, industrial]: 6.5684e-7 kg; lognormal variance with pedigree 1.6315, pedigree (1,1,4,1,1)
  (same comment as for Aluminium III)
- Cobalt II [soil, industrial]: 8.3272e-8 kg; lognormal variance with pedigree 1.9298, pedigree (1,1,4,1,1)
  (same comment as for Aluminium III)
- Copper ion [soil, industrial]: 4.1436e-6 kg; lognormal variance with pedigree 1.3918, pedigree (1,1,4,1,1)
  (same comment as for Aluminium III)
- Dioxins, measured as 2,3,7,8-tetrachlorodibenzo-p-dioxin [soil, industrial]: 8.6619e-13 kg; lognormal variance with pedigree 1.772, pedigree (1,1,4,1,1)
  (same comment as for Dioxins, measured as 2,3,7,8-tetrachlorodibenzo-p-dioxin)
- Fluoride [soil, industrial]: 1.8856e-5 kg; lognormal variance with pedigree 1.177, pedigree (1,1,4,1,1)
  (same comment as for Aluminium III)
- Iron ion [soil, industrial]: 1.5451e-5 kg; lognormal variance with pedigree 1.2181, pedigree (1,1,4,1,1)
  (same comment as for Aluminium III)
- Lead II [soil, industrial]: 2.7633e-5 kg; lognormal variance with pedigree 1.14, pedigree (1,1,4,1,1)
  (same comment as for Aluminium III)
- Magnesium [soil, industrial]: 0.00019697 kg; lognormal variance with pedigree 0.87947, pedigree (1,1,4,1,1)
  (same comment as for Aluminium III)
- Manganese II [soil, industrial]: 5.2666e-5 kg; lognormal variance with pedigree 1.0543, pedigree (1,1,4,1,1)
  (same comment as for Aluminium III)
- Mercury II [soil, industrial]: 1.2597e-7 kg; lognormal variance with pedigree 1.7267, pedigree (1,1,4,1,1)
  (same comment as for Aluminium III)
- Molybdenum VI [soil, industrial]: 8.2606e-7 kg; lognormal variance with pedigree 1.6015, pedigree (1,1,4,1,1)
  (same comment as for Aluminium III)
- Nickel II [soil, industrial]: 5.5501e-7 kg; lognormal variance with pedigree 1.6533, pedigree (1,1,4,1,1)
  (same comment as for Aluminium III)
- Nitrogen [soil, industrial]: 9.8819e-6 kg; lognormal variance with pedigree 0.7176, pedigree (1,1,4,1,1)
  (same comment as for Aluminium III)
- Phosphorus [soil, industrial]: 0.00010822 kg; lognormal variance with pedigree 0.9586, pedigree (1,1,4,1,1)
  (same comment as for Aluminium III)
- Potassium I [soil, industrial]: 6.4443e-5 kg; lognormal variance with pedigree 1.0265, pedigree (1,1,4,1,1)
  (same comment as for Aluminium III)
- Sodium [soil, industrial]: 1.3725e-5 kg; lognormal variance with pedigree 1.2307, pedigree (1,1,4,1,1)
  (same comment as for Aluminium III)
- Sulfur [soil, industrial]: 0.00010749 kg; lognormal variance with pedigree 0.93985, pedigree (1,1,4,1,1)
  (same comment as for Aluminium III)
- Zinc II [soil, industrial]: 1.7674e-5 kg; lognormal variance with pedigree 1.1995, pedigree (1,1,4,1,1)
  (same comment as for Aluminium III)
