# land use change, annual crop

Dataset: EcoSpold 2, unit process
Geography: BR-SC
Time period: 2014-01-01 to 2022-12-31
Technology level: current
Classification: ISIC rev.4 ecoinvent: 0161:Support activities for crop production
Tags: BRLUC
Scenario: Business-as-Usual
System model: Allocation at the point of substitution
Generated by: Ana Donke
Database: ecoinvent
isCopyrightProtected: true

## General comment
This dataset represents the impacts associated to 1 ha of land use change (LUC), split between change from annual cropland, perennial cropland, primary forest, grassland, pasture man made, sugarcane and forest intensive. This dataset is specific to the country and to annual cropland.
The dataset further includes the (management practice specific) occupation impacts, i.e. the loss of soil organic carbon (SOC) - based on SOCref values of Bernoux, 2001 and stock change factors of IPCC, 2006, weighted according to management and climate categories occurrence per state (Novaes, 2017) - and nitrous oxide (N2O). The types of exchanges, their emission and calculation factors and mathematical relations are the same from land transformations datasets 'land use change, annual crop, BR, 2010 - 2015' and 'land use change, perennial crop, BR, 2010 - 2015', available in Ecoinvent database (Rossi, 2017a,b).
The amount of this product to take into account as input to the crop inventory is dependent on the percentage of expansion and productivity of the specific crop in the Brazilian state considered. The percentage of expansion can be retrieved from Novaes, et al 2017, Appendix S2, tab 'Search results', box 5. More details in the Ecoinvent's Consideration of LUC report.
Bibliography is listed below:
- Bernoux, M., Carvalho, M. D. S., Volkoff, B., & Cerri, C. C. (2001). CO2 emission from mineral soils following land-cover change in Brazil. Global Change Biology, 7, 779–787.
- Brazil (2016) Third National Communication of Brazil to the United Nations Framework Convention on Climate Change – Volume III. Ministry of Science, Technology and Innovation, Brasília.
- IPCC (2006). 2006 IPCC Guidelines for national greenhouse gas inventories, prepared by the national greenhouse gas inventories programme. Eggleston H.S., Buendia L., Miwa K., Ngara T. and Tanabe K. (eds). IGES, Japan.
- Novaes RML, Pazianotto RA, Brandao M, Alves BJR, May A, Folegatti-Matsuura MIS. 2017. Estimating 20-year landuse change and derived CO2 emissions associated with crops, pasture and forestry in Brazil and each of its 27 states. Glob Change Biol. 23:3716–3728 .doi.org/10.1111/gcb.13708
- Rossi V, 2017a, land use change, annual crop, BR, Undefined, ecoinvent database version 3.3. Accessed in September, 2017
- Rossi V, 2017b, land use change, perennial crop, BR, Undefined, ecoinvent database version 3.3. Accessed in September, 2017
[This dataset is meant to replace the following datasets:
- land use change, annual crop, BR, 2010 - 2015]

## Included activities start
The activity starts with the consolidation of the country specific land use changes: land transformation from primary forest, grassland, existing annual cropland, existing perennial cropland, existing sugarcane, existing pasture man made and existing forest intensive, to annual cropland.

## Included activities end
Included processes: land use changes (in kg NPP0), C and N emissions due to soil occupation (i.e. SOC change.)
This activity ends with the addition of land occupation-related inputs and emissions (C in soil or biomass, CO2 from air, CO2 to air and N2O to air)
Emissions from peat oxidation by drainage, gross energy and other emissions related to organic soils are not considered, because of its small representativeness in Brazil (Brasil, 2016, page 143).

## Parameters
- LUC_crop_specific: 1 dimensionless
  This parameter allows to switch between a 'crop specific' and a 'country specific' approach when calculating the LUC of a crop. By default, the chosen approach is 'crop specific', so the value of the parameter is 1. If you want to apply a 'country specific' approach, turn the parameter to 0.
- SOCdif: 347.382 dimensionless; lognormal variance with pedigree 0.0106, pedigree (3,1,1,1,3)
  This is the difference of SOC of previous land uses weighted by the production volumes of each previous use and reference product land use (t0 - t1). SOC values and management assumptions derived from Appendix S1 from Novaes et al. 2017.

## Reference product
- land use change, annual crop: 1 ha; By-product classification allocatable product; CPC 7: Financial and related services; real estate services; and rental and leasing services
  Yield = 1.0 ha. Activities related land use change of annual crops, including clear-cutting (of grassland and primary forest), land already in use and emissions due to soil occupation.
  production volume 86434.7 ha
    Production volume is expressed as an indirect measure of area (ha) of the land use of this product. It is calculated through Ecoinvent default, which consists in multiplying current area of this land use in this state by 6.23%, which represents the proportion Brazilian Total Biomass Appropriation (TBA) in relation to the total sum of TBA of the World, according to Krausmann et al., 2008, Supplementar Table 5.\nThe production volumes and market shares of land tenure and LUC have a high level of uncertainty, which can have large impacts in overall LCIA results (Novaes et al. 2017). However, the uncertainty associated with these data could not easily be reflected in the datasets. Uncertainty assessments should take this limitation into consideration.
  properties: carbon allocation 0 kg, carbon content 0, price 0 EUR2005

## Inputs from technosphere
- land tenure, arable land, measured as carbon net primary productivity, annual crop: 405.5 kg; = 8110/20; lognormal variance with pedigree 0.008648, pedigree (2,2,3,2,1)
  Land tenure, arable land, measured as carbon net primary productivity per hectare per year. The average value for Latin America is 8110 kg C.ha-1.yr-1 and is divided per 20 years.

## Inputs from nature
- Carbon, organic, in soil or biomass stock [natural resource, in ground]: 17.3691 kg; = SOCdif/20; lognormal variance with pedigree 0.016223, pedigree (3,2,2,1,3)
  SOC change, excluding peat degradation. SOC of previous uses weighted by the production volumes of each previous land use minus SOC of reference product, divided by 20 years. SOC values derived from Appendix S1 from Novaes et al. 2017. In the case of carbon emission (positive SOCdif value) the flux is from the soil and biomass; in cases of carbon sequestration (negative SOCdif value), the flux is from the air.

## Emissions to nature
- Carbon dioxide, from soil or biomass stock [air, non-urban air or from high stacks]: 63.6867 kg; = SOCdif/20*44/12; lognormal variance with pedigree 0.016223, pedigree (3,2,2,1,3)
  Emissions from SOC change in mineral soils, excluding peat oxidation. Carbon organic in ground in kg C.ha-1.yr-1 divided by 20 years converted to CO2 (44/12). In the case of carbon emission (positive SOCdif value) the flux is towards the air; in cases of carbon sequestration (negative SOCdif value), the flux is towards the soil.
- Dinitrogen monoxide [air, non-urban air or from high stacks]: 0.0272943 kg; = SOCdif/10*0.01*44/28/20; lognormal variance with pedigree 0.016223, pedigree (3,2,2,1,3)
  Emissions from SOC change in mineral soils, excluding peat oxidation. SOCdif is divided by the land use default C:N ratio (10 or 15) to obtain Fsom, according to equation 11.8 from IPCC, 2006; Fsom is multiplied by 1%, according to IPCC, 2006 (Table 11.1), and then converted to N2O (44/28) and divided by 20 years.

## Sampling procedure
There was no sampling.

## Extrapolations
From the data of Novaes et al., 2017, the only extrapolation is the convertion of land use areas to land use change production volumes. More details about this can be found in the PV_comment.

Exchanges emission factors are the same from land transformations datasets 'land use change, annual crop, BR, 2010 - 2015' (Rossi, 2017a) and 'land use change, perennial crop, BR, 2010 - 2015' (Rossi, 2017b), thus extrapolated from a national level to state level.
