# operation, computer, desktop, with cathode ray tube display, standby mode

Dataset: EcoSpold 2, unit process
Geography: CA-QC
Time period: 2001-01-01 to 2022-12-31
Technology level: old
Classification: EcoSpold01Categories: electronics/services
Classification: ISIC rev.4 ecoinvent: 8219:Photocopying, document preparation and other specialized office support act
Synonyms: PC; CRT
Tags: Operation; Recontextualization
Scenario: Business-as-Usual
System model: Allocation at the point of substitution
Generated by: Pascal Lesage
Published in: Hischier R. 2007
Database: ecoinvent
isCopyrightProtected: false

## General comment
The computer desktop use in the standby/sleep mode includes the share of computer production (CPU, keyboard, mouse, CRT) as well as the energy consumption (use-phase) and the rail and road transport from factory to user. Energy consumption of computer CPUs and CRT monitors (use-phase) vary a lot depending on the computer looked at. Min.-Max. values are listed; the mean value is calculated via the most likely value according to the reference data. Due to relatively vague literature data for computer and CRT life span, assumptions had to be made.
Child dataset exchanges identical to GLO dataset. Created to enable linking to regional markets (e.g. for electricity). Data quality indicators adjusted accordingly.

## Included activities end
Describes the use of a desktop computer with a CRT monitor in the standby/sleep mode. Calculated per 1 hour of computer use. Computer life span assumed to be 4 years, for the CRT monitor 6 years. Standby/sleep mode 2 hours a day (office use), 240 days a year.

## Geography
The data is based on information by international computer manufacturers and literature (standby/sleep mode consumption).
Child dataset exchanges identical to GLO dataset. Created to enable linking to regional markets (e.g. for electricity). Data quality indicators adjusted accordingly.

## Technology
No technology involved, except for the production of the desktop computer (including CRT, keyboard and mouse), which is described in another dataset.

## Parameters
- Quebec gross domestic product 2011: 3.11e11 USD(2011); name quebecGDP2011; lognormal variance with pedigree 0.0006, pedigree (1,1,1,1,1)
  Quebec Gross domestic product for 2011, expressed in 2011 USD. Source: Institut de la statistique du Québec. Converted from CAD to USD using a yearly average exchange rate of 0.989 CAD/USD (Source: bank of Canada).
- fraction of computers (desktop) sold with cathode ray tube display: 0.36 % (obsolete); name fraction_computer_desktop_CRT_display; lognormal variance with pedigree 0.0566, pedigree (4,5,5,1,1)
  Literature value (ecoinvent report v2 no.18 IV).
- fraction of computers desktop sold for home use: 0.1 dimensionless; name fraction_computer_desktop_home_use; lognormal variance with pedigree 0.2106, pedigree (5,5,5,5,5)
  Estimation
- fraction of computers desktop sold for office use: 0.9 dimensionless; name fraction_computer_desktop_office_use; lognormal variance with pedigree 0.2106, pedigree (5,5,5,5,5)
  Estimation
- number of computers (desktop) sold in 2005 world: 1.304e8 dimensionless; name no_computer_desktop_sold_GLO_2005; = 130.4*1000000; lognormal variance with pedigree 0.0166, pedigree (4,5,1,1,1)
  Literature value (http://www.etforecasts.com/products/ES_pcww1203.htm). Number of computers (desktop, units) sold in 2005 in the whole world.
- number of computers (desktop) sold in 4 years: 4.79462e8 dimensionless; name no_computer_desktop_sold_4years; = no_computer_desktop_sold_GLO_2005+((123.109+116.226+109.727)*1000000); lognormal variance with pedigree 0.0166, pedigree (4,5,1,1,1)
  Calculated value. Number of computers (desktop) sold in 4 years (from 2002 - 2005 included). Using annual growth of 5.92%. Literature value (http://www.etforecasts.com/products/ES_pcww1203.htm); worldwide sales of desktop computers in millions in 2005 was 130.4 mill. units. Calculated values (using annual growth of 5.92%); 123.1 mil. (2004), 116.2 mil. (2003) and 109.7 mil. (2002).
- number of days in a year computer desktop home use: 365 dimensionless; name no_days_computer_desktop_home_use; lognormal variance with pedigree 0.1786, pedigree (4,5,5,5,5)
  Estimation (based on assumptions made in ecoinvent report no.18 IV ecoinvent database v2). Number of days in the year when computer (desktop) is used in a home.
- number of days in a year computer desktop office use: 200 dimensionless; name no_days_computer_desktop_office_use; lognormal variance with pedigree 0.1786, pedigree (4,5,5,5,5)
  Estimation (based on assumptions made in ecoinvent report no.18 IV ecoinvent database v2). Number of days in the year when computer (desktop) is used in the office.
- number of hours in a day when computer (desktop) is in standby mode - home use: 2.62 dimensionless; name no_hours_computer_desktop_SM_home_use; lognormal variance with pedigree 0.0127, pedigree (4,4,3,3,1)
  Literature value (Williams, 2005).
- number of hours in a day when computer (desktop) is in standby mode - office use: 2 dimensionless; name no_hours_computer_desktop_SM_office_use; lognormal variance with pedigree 0.0127, pedigree (4,4,3,3,1)
  Literature value (Williams, 2005).
- world gross domestic product 2011: 7e13 USD(2011); name worldGDP2011; lognormal variance with pedigree 0.0006, pedigree (1,1,1,1,1)
  World Gross domestic product for 2011, expressed in 2011 USD. Source: World Bank.

## Reference product
- operation, computer, desktop, with cathode ray tube display, standby mode: 1 hour; By-product classification allocatable product; CPC 85: Support services
  production volume 3.49407e8 hour
    Calculated value based on literature values and estimates. See comments of the parametres used to calculate this value. Computer (desktop) lifetime is estimated to be 4 years (based on ecoinvent report v2 18, IV). The amount of computers (desktop) sold in total in 4 years is calculated. 36% are sold with CRT screen and 64% with LCD screen. It is assumed that 90% of those computers are being used in an office and 10% in a home. The ones used in an office are used 200 days in a year in standby mode, 2 hours a day. The ones used in a home in standby mode are used 365 days in a year, 2.62 hours a day.
  property price 0.0216252 EUR2005
    Calculated based on inputs: The price of the product has been calculated as a sum of the values of the material and energy inputs for this product. This value is therefore a rough estimation. It may underestimate the real price since there are additional expenses when producing any product. These expences can include for example labour costs, treatment of waste materials and profit for the producer. Please consider carefully whether this level of data quality is acceptable for your application.
  properties: carbon allocation 0 kg, carbon content 0

## Inputs from technosphere
- computer, desktop, without screen: 2.8539e-5 unit; lognormal variance with pedigree 0.0546, pedigree (3,3,5,5,1)
  properties: carbon content, fossil 0.0877555, carbon content, non-fossil 0.000485011, dry mass 11.3 kg, wet mass 11.3 kg
  note on carbon content, fossil: Calculated as the addition of C contents in the product composition, then referred to 1 kg DM
- display, cathode ray tube, 17 inches: 1.9026e-5 unit; lognormal variance with pedigree 0.0546, pedigree (3,3,5,5,1)
  properties: carbon content, fossil 0.163203, carbon content, non-fossil 0.00235652, dry mass 19.86 kg, wet mass 19.86 kg
- electricity, low voltage: 0.045 kWh; lognormal variance with pedigree 0.0432, pedigree (2,3,5,5,1)
- keyboard: 2.8539e-5 unit; lognormal variance with pedigree 0.0546, pedigree (3,3,5,5,1)
  properties: carbon content, fossil 0.57577, dry mass 1.18 kg, wet mass 1.18 kg
- pointing device, optical mouse, with cable: 2.8539e-5 unit; lognormal variance with pedigree 0.0546, pedigree (3,3,5,5,1)
  properties: carbon content, fossil 0.482336, dry mass 0.12 kg, wet mass 0.12 kg

## Sampling procedure
Manufacturers, literature and own assumptions.

## Extrapolations
see Geography and Technology This dataset has been copied from an original dataset covering the geography Europe without Switzerland. The uncertainty has been adjusted accordingly.Child dataset exchanges identical to GLO dataset. Created to enable linking to regional markets (e.g. for electricity). Data quality indicators adjusted accordingly.
