# treatment of municipal solid waste, unsanitary landfill, hyperarid infiltration class (-250mm)

Dataset: EcoSpold 2, unit process
Geography: GLO
Time period: 2006-01-01 to 2022-12-31
Technology level: current
Classification: ISIC rev.4 ecoinvent: 3821:Treatment and disposal of non-hazardous waste
Synonyms: municipal waste landfill
Scenario: Business-as-Usual
System model: Allocation at the point of substitution
Share of production covered: 1 %
Generated by: Avraam Symeonidis
Database: ecoinvent
isCopyrightProtected: true

## General comment
This dataset represents the activity of waste disposal of municipal solid waste in an unsanitary landfill. Recommended use of this dataset: For municipal solid waste, which goes to disposal as part of managed communal waste mixture.Inventoried waste contains 21% paper; 8% Mixed cardboard; 15% plastics; 3% laminated materials; 2% laminated packaging, e.g. tetra bricks; 3% combined goods e.g. diapers; 3% glass; 2% textiles; 8% minerals; 9% natural products; 22% compostable material; 2.65% inert metals; 1% volatile metals; 0.0065% batteries; 0.34% electronic goods; . // Waste composition (wet, in ppm): upper heating value 13.27 MJ/kg; lower heating value 11.74 MJ/kg; H2O 228830; O 257060; H 48250; C 334230; S 1119; N 3123.8; P 893.79; B 7.1933; Cl 6866.2; Br 13.552; F 56.358; I 0.0121; Ag 0.714; As 0.62521; Ba 149.04; Cd 11.748; Co 1.3453; Cr 315.21; Cu 1212.8; Hg 1.4424; Mn 259.36; Mo 1.9551; Ni 107.38; Pb 502.43; Sb 22.564; Se 0.31969; Sn 73.44; V 9.2147; Zn 1311.2; Be n.a.; Sc n.a.; Sr n.a.; Ti n.a.; Tl n.a.; W n.a.; Si 48510; Fe 29996; Ca 14062; Al 12420; K 2059.7; Mg 3377.7; Na 5143.9; . // Share of carbon in waste that is biogenic 60.4%. Share of metals in waste not oxidised and bulk-recyclable (exclude very small or thin parts) Iron: 60.03%; Alu: 17.81%; Copper: 72.83%. Overall degradability of waste during 100 years: 18.73%. Degradability of composing waste fractions: paper: 27%; Mixed cardboard: 32.4%; plastics: 1%; laminated materials: 18%; laminated packaging, e.g. tetra bricks: 18%; combined goods e.g. diapers: 18%; glass: 0%; textiles: 12%; minerals: 0%; natural products: 27%; compostable material: 27%; inert metals: 10%; volatile metals: 0%; batteries: 0%; electronic goods: 0%; ..

## Included activities start
from final waste deposition (without transports to the site)

## Included activities end
Waste-specific short-term emissions to air via landfill gas and landfill leachate. Waste-specific long-term emissions from landfill.

## Geography
Given name of landfill location is 'infiltration class 1 hyperarid (2018)'. Landfill site with mean annual temperature (MAT) of 8 degC, mean annual precipitation (MAP) of 350 mm/year, and net infiltration of -250 mm/year. Negative infiltration means that leachate flow is reversed and flows upward to the surface, where water is evaporated and dissolved solids become solid evaporites.
Climate adjustments result in an alpha t (temperature) for permafrost areas of 0.999. Total climate adjustments with alpha pt of 0.999.

## Technology
This is an inventory for an unsanitary, sub-controlled landfill for municipal solid waste. Ultimate average landfill height is 15 meters. Operation phase duration is 25 years.Percentage of landfill gas directly emitted is 100w%.
Leachate of the landfill is not treated. Leachate flow is upward to the surface due to net negative infiltration. No leachate treatment can be performed. Based on average waste composition and climate data the end of carbonate phase is estimated to be reached 6681 years after waste deposition. Arid conditions at this location prompt formation of evaporites from landfill contents which are partially eroded by wind. It is assumed that 10% of these evaporites are eroded by wind and airborne. Initial decay in the first 100 years of this waste results in a wind erosion rate corresponding to 208.4 g/m2.year and long-term decay corresponds to wind erosion of 15.31 g/m2.year.

## Reference product
- municipal solid waste: -1 kg; By-product classification Waste; CPC 39910: Municipal waste
  main reference product of this activity (supply of disposal service).
  production volume 1 kg
    The amount of the annual production volume is a placeholder value. The contribution of this technology to the different local markets can be found in the markets themselves.
  property heating value, net 11.74 MJ
    Value taken from the general comment of the treatment dataset.
  property price 0 EUR2005
    Waste products are assigned a price of zero as they are assumed to require further treatment.
  properties: aluminium content 0.016105, antimony content 2.9259e-5, arsenic content 8.1073e-7, barium content 0.00019326, boron content 9.3277e-6, bromine content 1.7573e-5, cadmium content 1.5233e-5, calcium content 0.018235, carbon allocation 0.334225 kg, carbon content 0.4334, carbon content, fossil 0.17157, carbon content, non-fossil 0.26183, chlorine content 0.0089036, chromium content 0.00040874, cobalt content 1.7444e-6, copper content 0.0015726, dry mass 0.77117 kg, fluorine content 7.3081e-5, heating value, gross 13.272 MJ, hydrogen content 0.062567, iodine content 1.569e-8, iron content 0.038897, lead content 0.00065151, magnesium content 0.0043799, manganese content 0.00033632, mercury content 1.8704e-6, molybdenum content 2.5352e-6, nickel content 0.00013925, nitrogen content 0.0040508, oxygen content 0.33334, phosphorus content 0.001159, potassium content 0.0026709, selenium content 4.1455e-7, silicon content 0.062904, silver content 9.2586e-7, sodium content 0.0066702, sulfur content 0.0014511, tin content 9.5231e-5, vanadium content 1.1949e-5, water content 0.29672, water in wet mass 0.22883 kg, wet mass 1 kg, zinc content 0.0017003

## Inputs from technosphere
- diesel, burned in building machine: 0.046738 MJ; lognormal variance with pedigree 0.088256, pedigree (1,1,4,1,1)
  for waste distribution and compaction.
  Uncertainty: Uncertainty calculated from uncertainty in base parameters.
  properties: heating value, net 1 MJ
- excavation, skid-steer loader: 0.00031708 m3; lognormal variance with pedigree 0.088256, pedigree (1,1,4,1,1)
  application of daily cover.
  Uncertainty: Uncertainty calculated from uncertainty in base parameters.

## Inputs from nature
- Occupation, dump site [natural resource, land]: 0.0023333 m2*year; lognormal variance with pedigree 0.088256, pedigree (1,1,4,1,1)
  for landfill operation phase and spontaneous renaturation.
  Uncertainty: Uncertainty calculated from uncertainty in base parameters.

## Emissions to nature
- Aluminium III [air, low population density, long-term]: 0.0012324 kg; lognormal variance with pedigree 0.093417, pedigree (1,1,4,1,1)
  burden from windblown long-term leachate evaporite in arid climates.
  Uncertainty: Uncertainty calculated from unertainty of the waste composition of this waste, uncertainty in waste decomposition and short-term leaching in landfill
- Aluminium III [air, non-urban air or from high stacks]: 9.5968e-6 kg; lognormal variance with pedigree 0.19123, pedigree (1,1,4,1,1)
  burden from direct release or incineration of landfill biogas; or windblown leachate evaporite in arid climates.
  Uncertainty: Uncertainty calculated from unertainty of the waste composition of this waste, uncertainty in waste decomposition and short-term leaching in landfill
- Antimony ion [air, low population density, long-term]: 3.1232e-7 kg; lognormal variance with pedigree 0.54204, pedigree (1,1,4,1,1)
  (same comment as for Aluminium III)
- Antimony ion [air, non-urban air or from high stacks]: 1.2936e-8 kg; lognormal variance with pedigree 0.40433, pedigree (1,1,4,1,1)
  (same comment as for Aluminium III)
- Arsenic ion [air, low population density, long-term]: 5.9479e-8 kg; lognormal variance with pedigree 0.41558, pedigree (1,1,4,1,1)
  (same comment as for Aluminium III)
- Arsenic ion [air, non-urban air or from high stacks]: 3.4206e-9 kg; lognormal variance with pedigree 0.40669, pedigree (1,1,4,1,1)
  (same comment as for Aluminium III)
- Barium II [air, low population density, long-term]: 1.3807e-5 kg; lognormal variance with pedigree 0.23534, pedigree (1,1,4,1,1)
  (same comment as for Aluminium III)
- Barium II [air, non-urban air or from high stacks]: 1.0989e-6 kg; lognormal variance with pedigree 0.27096, pedigree (1,1,4,1,1)
  (same comment as for Aluminium III)
- Boron [air, low population density, long-term]: 7.1933e-16 kg; lognormal variance with pedigree 0.8163, pedigree (1,1,4,1,1)
  (same comment as for Aluminium III)
- Boron [air, non-urban air or from high stacks]: 7.1933e-7 kg; lognormal variance with pedigree 0.33585, pedigree (1,1,4,1,1)
  (same comment as for Aluminium III)
- Bromine [air, low population density, long-term]: 1.1843e-6 kg; lognormal variance with pedigree 0.3152, pedigree (1,1,4,1,1)
  (same comment as for Aluminium III)
- Bromine [air, non-urban air or from high stacks]: 1.9216e-7 kg; lognormal variance with pedigree 0.2923, pedigree (1,1,4,1,1)
  (same comment as for Aluminium III)
- Cadmium II [air, low population density, long-term]: 1.1607e-6 kg; lognormal variance with pedigree 0.31966, pedigree (1,1,4,1,1)
  (same comment as for Aluminium III)
- Cadmium II [air, non-urban air or from high stacks]: 1.4863e-8 kg; lognormal variance with pedigree 0.3748, pedigree (1,1,4,1,1)
  (same comment as for Aluminium III)
- Calcium [air, low population density, long-term]: 0.0013749 kg; lognormal variance with pedigree 0.089783, pedigree (1,1,4,1,1)
  (same comment as for Aluminium III)
- Calcium [air, non-urban air or from high stacks]: 3.1386e-5 kg; lognormal variance with pedigree 0.15686, pedigree (1,1,4,1,1)
  (same comment as for Aluminium III)
- Carbon dioxide, fossil [air, non-urban air or from high stacks]: 0.0038498 kg; lognormal variance with pedigree 0.037012, pedigree (1,1,4,1,1)
  burden from direct release or incineration of landfill biogas.
  Uncertainty: Uncertainty calculated from unertainty of the waste composition of this waste, uncertainty in waste decomposition and short-term leaching in landfill
- Carbon dioxide, non-fossil [air, non-urban air or from high stacks]: 0.084237 kg; lognormal variance with pedigree 0.008, pedigree (1,1,4,1,1)
  (same comment as for Carbon dioxide, fossil)
- Chromium III [air, low population density, long-term]: 2.0211e-7 kg; lognormal variance with pedigree 1.8039, pedigree (1,1,4,1,1)
  (same comment as for Aluminium III)
- Chromium III [air, non-urban air or from high stacks]: 3.375e-8 kg; lognormal variance with pedigree 0.36982, pedigree (1,1,4,1,1)
  (same comment as for Aluminium III)
- Cobalt II [air, low population density, long-term]: 1.2292e-7 kg; lognormal variance with pedigree 0.39088, pedigree (1,1,4,1,1)
  (same comment as for Aluminium III)
- Cobalt II [air, non-urban air or from high stacks]: 1.1631e-8 kg; lognormal variance with pedigree 0.42244, pedigree (1,1,4,1,1)
  (same comment as for Aluminium III)
- Copper ion [air, low population density, long-term]: 0.00012125 kg; lognormal variance with pedigree 0.16612, pedigree (1,1,4,1,1)
  (same comment as for Aluminium III)
- Copper ion [air, non-urban air or from high stacks]: 2.9159e-8 kg; lognormal variance with pedigree 0.37426, pedigree (1,1,4,1,1)
  (same comment as for Aluminium III)
- Hydrochloric acid [air, low population density, long-term]: 0.00056074 kg; lognormal variance with pedigree 0.11173, pedigree (1,1,4,1,1)
  (same comment as for Aluminium III)
- Hydrochloric acid [air, non-urban air or from high stacks]: 0.00014203 kg; lognormal variance with pedigree 0.106727, pedigree (1,1,4,1,1)
  (same comment as for Aluminium III)
- Hydrogen fluoride [air, low population density, long-term]: 4.9761e-6 kg; lognormal variance with pedigree 0.26788, pedigree (1,1,4,1,1)
  (same comment as for Aluminium III)
- Hydrogen fluoride [air, non-urban air or from high stacks]: 5.9228e-6 kg; lognormal variance with pedigree 0.29141, pedigree (1,1,4,1,1)
  (same comment as for Aluminium III)
- Iodine [air, low population density, long-term]: 3.7678e-10 kg; lognormal variance with pedigree 0.49266, pedigree (1,1,4,1,1)
  (same comment as for Aluminium III)
- Iodine [air, non-urban air or from high stacks]: 9.3689e-10 kg; lognormal variance with pedigree 0.43332, pedigree (1,1,4,1,1)
  (same comment as for Aluminium III)
- Iron ion [air, low population density, long-term]: 0.0029965 kg; lognormal variance with pedigree 0.068361, pedigree (1,1,4,1,1)
  (same comment as for Aluminium III)
- Iron ion [air, non-urban air or from high stacks]: 3.1117e-6 kg; lognormal variance with pedigree 0.22922, pedigree (1,1,4,1,1)
  (same comment as for Aluminium III)
- Lead II [air, low population density, long-term]: 5.0226e-5 kg; lognormal variance with pedigree 0.19497, pedigree (1,1,4,1,1)
  (same comment as for Aluminium III)
- Lead II [air, non-urban air or from high stacks]: 1.6899e-8 kg; lognormal variance with pedigree 0.39173, pedigree (1,1,4,1,1)
  (same comment as for Aluminium III)
- Magnesium [air, low population density, long-term]: 0.00029693 kg; lognormal variance with pedigree 0.13353, pedigree (1,1,4,1,1)
  (same comment as for Aluminium III)
- Magnesium [air, non-urban air or from high stacks]: 4.0926e-5 kg; lognormal variance with pedigree 0.15833, pedigree (1,1,4,1,1)
  (same comment as for Aluminium III)
- Manganese II [air, low population density, long-term]: 2.5342e-5 kg; lognormal variance with pedigree 0.21685, pedigree (1,1,4,1,1)
  (same comment as for Aluminium III)
- Manganese II [air, non-urban air or from high stacks]: 5.9505e-7 kg; lognormal variance with pedigree 0.2827, pedigree (1,1,4,1,1)
  (same comment as for Aluminium III)
- Mercury II [air, low population density, long-term]: 1.4382e-7 kg; lognormal variance with pedigree 0.38847, pedigree (1,1,4,1,1)
  (same comment as for Aluminium III)
- Mercury II [air, non-urban air or from high stacks]: 1.4954e-9 kg; lognormal variance with pedigree 0.47615, pedigree (1,1,4,1,1)
  (same comment as for Aluminium III)
- Methane, fossil [air, non-urban air or from high stacks]: 0.0017782 kg; lognormal variance with pedigree 0.047144, pedigree (1,1,4,1,1)
  (same comment as for Carbon dioxide, fossil)
- Methane, non-fossil [air, non-urban air or from high stacks]: 0.038908 kg; lognormal variance with pedigree 0.047144, pedigree (1,1,4,1,1)
  (same comment as for Carbon dioxide, fossil)
- Molybdenum VI [air, low population density, long-term]: 9.6819e-8 kg; lognormal variance with pedigree 0.40849, pedigree (1,1,4,1,1)
  (same comment as for Aluminium III)
- Molybdenum VI [air, non-urban air or from high stacks]: 5.6402e-9 kg; lognormal variance with pedigree 0.43782, pedigree (1,1,4,1,1)
  (same comment as for Aluminium III)
- Nickel II [air, low population density, long-term]: 1.07e-5 kg; lognormal variance with pedigree 0.24614, pedigree (1,1,4,1,1)
  (same comment as for Aluminium III)
- Nickel II [air, non-urban air or from high stacks]: 3.8435e-8 kg; lognormal variance with pedigree 0.36711, pedigree (1,1,4,1,1)
  (same comment as for Aluminium III)
- Nitrate [air, low population density, long-term]: 0.00068634 kg; lognormal variance with pedigree 0.13894, pedigree (1,1,4,1,1)
  (same comment as for Aluminium III)
- Nitrate [air, non-urban air or from high stacks]: 0.0006522 kg; lognormal variance with pedigree 0.13978, pedigree (1,1,4,1,1)
  burden from windblown leachate evaporite in arid climates.
  Uncertainty: Uncertainty calculated from unertainty of the waste composition of this waste, uncertainty in waste decomposition and short-term leaching in landfill
- Nitrogen oxides [air, non-urban air or from high stacks]: 8.6435e-7 kg; lognormal variance with pedigree 0.20453, pedigree (1,1,4,1,1)
  (same comment as for Carbon dioxide, fossil)
- Particulate Matter, < 2.5 um [air, low population density, long-term]: 0.012225 kg; lognormal variance with pedigree 0.13221, pedigree (1,1,4,1,1)
  (same comment as for Aluminium III)
- Particulate Matter, < 2.5 um [air, non-urban air or from high stacks]: 0.00027781 kg; lognormal variance with pedigree 0.16879, pedigree (1,1,4,1,1)
  (same comment as for Aluminium III)
- Particulate Matter, > 10 um [air, low population density, long-term]: 0.030562 kg; lognormal variance with pedigree 0.067047, pedigree (1,1,4,1,1)
  (same comment as for Aluminium III)
- Particulate Matter, > 10 um [air, non-urban air or from high stacks]: 0.00069451 kg; lognormal variance with pedigree 0.103633, pedigree (1,1,4,1,1)
  (same comment as for Aluminium III)
- Particulate Matter, > 2.5 um and < 10um [air, low population density, long-term]: 0.018337 kg; lognormal variance with pedigree 0.0868, pedigree (1,1,4,1,1)
  (same comment as for Aluminium III)
- Particulate Matter, > 2.5 um and < 10um [air, non-urban air or from high stacks]: 0.00041671 kg; lognormal variance with pedigree 0.12339, pedigree (1,1,4,1,1)
  (same comment as for Aluminium III)
- Phosphorus [air, low population density, long-term]: 5.919e-6 kg; lognormal variance with pedigree 0.635, pedigree (1,1,4,1,1)
  (same comment as for Aluminium III)
- Phosphorus [air, non-urban air or from high stacks]: 1.3538e-6 kg; lognormal variance with pedigree 0.25503, pedigree (1,1,4,1,1)
  (same comment as for Aluminium III)
- Potassium I [air, low population density, long-term]: 0.00016325 kg; lognormal variance with pedigree 0.14962, pedigree (1,1,4,1,1)
  (same comment as for Aluminium III)
- Potassium I [air, non-urban air or from high stacks]: 4.2817e-5 kg; lognormal variance with pedigree 0.16363, pedigree (1,1,4,1,1)
  (same comment as for Aluminium III)
- Selenium IV [air, low population density, long-term]: 1.1756e-8 kg; lognormal variance with pedigree 0.4988, pedigree (1,1,4,1,1)
  (same comment as for Aluminium III)
- Selenium IV [air, non-urban air or from high stacks]: 6.1063e-10 kg; lognormal variance with pedigree 0.50764, pedigree (1,1,4,1,1)
  (same comment as for Aluminium III)
- Silicon [air, low population density, long-term]: 0.00014551 kg; lognormal variance with pedigree 0.82376, pedigree (1,1,4,1,1)
  (same comment as for Aluminium III)
- Silicon [air, non-urban air or from high stacks]: 2.0787e-5 kg; lognormal variance with pedigree 0.17164, pedigree (1,1,4,1,1)
  (same comment as for Aluminium III)
- Silver I [air, low population density, long-term]: 7.14e-8 kg; lognormal variance with pedigree 0.41124, pedigree (1,1,4,1,1)
  (same comment as for Aluminium III)
- Sodium [air, low population density, long-term]: 0.00040925 kg; lognormal variance with pedigree 0.12071, pedigree (1,1,4,1,1)
  (same comment as for Aluminium III)
- Sodium [air, non-urban air or from high stacks]: 0.00010537 kg; lognormal variance with pedigree 0.13512, pedigree (1,1,4,1,1)
  (same comment as for Aluminium III)
- Sulfate [air, low population density, long-term]: 0.00030813 kg; lognormal variance with pedigree 0.16889, pedigree (1,1,4,1,1)
  (same comment as for Aluminium III)
- Sulfate [air, non-urban air or from high stacks]: 2.3463e-5 kg; lognormal variance with pedigree 0.20702, pedigree (1,1,4,1,1)
  (same comment as for Nitrate)
- Sulfur dioxide [air, non-urban air or from high stacks]: 2.7407e-5 kg; lognormal variance with pedigree 0.25388, pedigree (1,1,4,1,1)
  (same comment as for Carbon dioxide, fossil)
- Tin ion [air, low population density, long-term]: 7.3426e-6 kg; lognormal variance with pedigree 0.25878, pedigree (1,1,4,1,1)
  (same comment as for Aluminium III)
- Tin ion [air, non-urban air or from high stacks]: 1.3662e-9 kg; lognormal variance with pedigree 0.47543, pedigree (1,1,4,1,1)
  (same comment as for Aluminium III)
- Vanadium V [air, low population density, long-term]: 3.4893e-7 kg; lognormal variance with pedigree 0.38579, pedigree (1,1,4,1,1)
  (same comment as for Aluminium III)
- Vanadium V [air, non-urban air or from high stacks]: 1.8286e-8 kg; lognormal variance with pedigree 0.39734, pedigree (1,1,4,1,1)
  (same comment as for Aluminium III)
- Zinc II [air, low population density, long-term]: 0.0001309 kg; lognormal variance with pedigree 0.16359, pedigree (1,1,4,1,1)
  (same comment as for Aluminium III)
- Zinc II [air, non-urban air or from high stacks]: 2.2937e-7 kg; lognormal variance with pedigree 0.30752, pedigree (1,1,4,1,1)
  (same comment as for Aluminium III)
- Aluminium III [soil, industrial]: 0.011178 kg; lognormal variance with pedigree 0.092079, pedigree (1,1,4,1,1)
  burden from leachate evaporite in arid climates deposited on landflill surface.
  Uncertainty: Uncertainty calculated from unertainty of the waste composition of this waste, uncertainty in waste decomposition and short-term leaching in landfill
- Antimony ion [soil, industrial]: 2.927e-6 kg; lognormal variance with pedigree 0.52854, pedigree (1,1,4,1,1)
  (same comment as for Aluminium III)
- Arsenic ion [soil, industrial]: 5.6231e-7 kg; lognormal variance with pedigree 0.39487, pedigree (1,1,4,1,1)
  (same comment as for Aluminium III)
- Barium II [soil, industrial]: 0.00013413 kg; lognormal variance with pedigree 0.21295, pedigree (1,1,4,1,1)
  (same comment as for Aluminium III)
- Boron [soil, industrial]: 6.4739e-6 kg; lognormal variance with pedigree 0.33585, pedigree (1,1,4,1,1)
  (same comment as for Aluminium III)
- Bromine [soil, industrial]: 1.2176e-5 kg; lognormal variance with pedigree 0.27209, pedigree (1,1,4,1,1)
  (same comment as for Aluminium III)
- Cadmium II [soil, industrial]: 1.0572e-5 kg; lognormal variance with pedigree 0.31469, pedigree (1,1,4,1,1)
  (same comment as for Aluminium III)
- Calcium [soil, industrial]: 0.012656 kg; lognormal variance with pedigree 0.086354, pedigree (1,1,4,1,1)
  (same comment as for Aluminium III)
- Carbon [soil, industrial]: 0.25172 kg; lognormal variance with pedigree 0.0165212, pedigree (1,1,4,1,1)
  (same comment as for Aluminium III)
- Chloride [soil, industrial]: 0.0061639 kg; lognormal variance with pedigree 0.085246, pedigree (1,1,4,1,1)
  (same comment as for Aluminium III)
- Chromium III [soil, industrial]: 2.122e-6 kg; lognormal variance with pedigree 1.7992, pedigree (1,1,4,1,1)
  (same comment as for Aluminium III)
- Cobalt II [soil, industrial]: 1.2107e-6 kg; lognormal variance with pedigree 0.35627, pedigree (1,1,4,1,1)
  (same comment as for Aluminium III)
- Copper ion [soil, industrial]: 0.0010915 kg; lognormal variance with pedigree 0.16604, pedigree (1,1,4,1,1)
  (same comment as for Aluminium III)
- Fluoride [soil, industrial]: 4.575e-5 kg; lognormal variance with pedigree 0.26015, pedigree (1,1,4,1,1)
  (same comment as for Aluminium III)
- Heat, waste [soil, industrial]: 1.2748 MJ; lognormal variance with pedigree 0.047854, pedigree (1,1,4,1,1)
  burden from short-term decomposition of waste (0-100a).
  Uncertainty: Uncertainty calculated from unertainty of the waste composition of this waste, uncertainty in waste decomposition and short-term leaching in landfill
- Iodide [soil, industrial]: 1.0786e-8 kg; lognormal variance with pedigree 0.37491, pedigree (1,1,4,1,1)
  (same comment as for Aluminium III)
- Iron ion [soil, industrial]: 0.026997 kg; lognormal variance with pedigree 0.068209, pedigree (1,1,4,1,1)
  (same comment as for Aluminium III)
- Lead II [soil, industrial]: 0.00045219 kg; lognormal variance with pedigree 0.19484, pedigree (1,1,4,1,1)
  (same comment as for Aluminium III)
- Magnesium [soil, industrial]: 0.0030398 kg; lognormal variance with pedigree 0.1112, pedigree (1,1,4,1,1)
  (same comment as for Aluminium III)
- Manganese II [soil, industrial]: 0.00023342 kg; lognormal variance with pedigree 0.2096, pedigree (1,1,4,1,1)
  (same comment as for Aluminium III)
- Mercury II [soil, industrial]: 1.2971e-6 kg; lognormal variance with pedigree 0.3874, pedigree (1,1,4,1,1)
  (same comment as for Aluminium III)
- Molybdenum VI [soil, industrial]: 9.2201e-7 kg; lognormal variance with pedigree 0.3857, pedigree (1,1,4,1,1)
  (same comment as for Aluminium III)
- Nickel II [soil, industrial]: 9.6644e-5 kg; lognormal variance with pedigree 0.24474, pedigree (1,1,4,1,1)
  (same comment as for Aluminium III)
- Nitrogen [soil, industrial]: 0.0027203 kg; lognormal variance with pedigree 0.082238, pedigree (1,1,4,1,1)
  (same comment as for Aluminium III)
- Phosphorus [soil, industrial]: 6.5455e-5 kg; lognormal variance with pedigree 0.58912, pedigree (1,1,4,1,1)
  (same comment as for Aluminium III)
- Potassium I [soil, industrial]: 0.0018536 kg; lognormal variance with pedigree 0.11137, pedigree (1,1,4,1,1)
  (same comment as for Aluminium III)
- Selenium IV [soil, industrial]: 1.1128e-7 kg; lognormal variance with pedigree 0.47742, pedigree (1,1,4,1,1)
  (same comment as for Aluminium III)
- Silicon [soil, industrial]: 0.0014962 kg; lognormal variance with pedigree 0.80552, pedigree (1,1,4,1,1)
  (same comment as for Aluminium III)
- Silver I [soil, industrial]: 6.426e-7 kg; lognormal variance with pedigree 0.41124, pedigree (1,1,4,1,1)
  (same comment as for Aluminium III)
- Sodium [soil, industrial]: 0.0046292 kg; lognormal variance with pedigree 0.08949, pedigree (1,1,4,1,1)
  (same comment as for Aluminium III)
- Sulfur [soil, industrial]: 0.00099479 kg; lognormal variance with pedigree 0.15191, pedigree (1,1,4,1,1)
  (same comment as for Aluminium III)
- Tin ion [soil, industrial]: 6.6096e-5 kg; lognormal variance with pedigree 0.25869, pedigree (1,1,4,1,1)
  (same comment as for Aluminium III)
- Vanadium V [soil, industrial]: 3.3046e-6 kg; lognormal variance with pedigree 0.36624, pedigree (1,1,4,1,1)
  (same comment as for Aluminium III)
- Zinc II [soil, industrial]: 0.0011801 kg; lognormal variance with pedigree 0.16305, pedigree (1,1,4,1,1)
  (same comment as for Aluminium III)
- Heat, waste [water, ground-, long-term]: 11.086 MJ; lognormal variance with pedigree 0.024567, pedigree (1,1,4,1,1)
  burden from long-term decomposition of waste (>100a).
  Uncertainty: Uncertainty calculated from unertainty of the waste composition of this waste, uncertainty in waste decomposition and short-term leaching in landfill
