# treatment of Cu-based antifouling paint emissions

Dataset: EcoSpold 2, unit process
Geography: PE
Time period: 2010-01-01 to 2022-12-31
Technology level: current
Classification: ISIC rev.4 ecoinvent: 0311:Marine fishing
Scenario: Business-as-Usual
System model: Allocation at the point of substitution
Generated by: Angel Avadí
Published in: Avadí, A. 2018
Database: ecoinvent
isCopyrightProtected: true

## General comment
This activity represents the direct emissions to ocean of Cu-based antifouling paint. 2/3 of the dry matter of the active substances present in the paint are assumed to be emitted. Data from analysis of 2 antifouling paints used in Peru

## Included activities start
Direct emissions to the marine environment

## Geography
Data from Peru, extrapolated to global (GLO). Not representative of European conditions

## Technology
Two samples of common antifouling paints used in Peru, were analysed by the French laboratory UT2A (http://www.univ-pau.fr/ut2a) in 2010. Values are means from the two analyses, and uncertainty data are also based on measured values.

## Reference product
- antifouling paint emissions: -1 kg; name mass; source Angel Avadí 2014; By-product classification Waste; CPC 34666: Hazardous pesticides
  Mass of solids from antifouling paint
  production volume 0.002923 kg
    GDP for Peru as a proportion of the world
  property carbon content, fossil 0.21; name mass_C_content_fossil
    Calculated from antifouling paint formulation
  property carbon content, non-fossil 0.21; name mass_C_content_non_fossil
    Calculated from antifouling paint formulation
  property price 0 EUR2005
    Waste products are assigned a price of zero as they are assumed to require further treatment.
  properties: carbon allocation 0.42 kg, carbon content 0.42, dry mass 1 kg, water content 0, water in wet mass 0 kg, wet mass 1 kg

## Emissions to nature
- Arsenic ion [water, ocean]: 3.5e-6 kg; name l; source Angel Avadí 2014; triangular min 1e-6, mostLikely 3.5e-6, max 6e-6, pedigree (1,3,4,1,1)
  Mass of arsenic emitted
  Uncertainty: 2 samples included this substance
- Copper ion [water, ocean]: 0.384 kg; name a; source Angel Avadí 2014; triangular min 0.363, mostLikely 0.384, max 0.405, pedigree (1,3,4,1,1)
  Mass of copper emitted
  Uncertainty: 2 samples included this substance
- Lead II [water, ocean]: 0.000411 kg; name b; source Angel Avadí 2014; triangular min 0.000107, mostLikely 0.000411, max 0.000715, pedigree (1,3,4,1,1)
  Mass of lead emitted
  Uncertainty: 2 samples included this substance
- Nickel II [water, ocean]: 5.95e-5 kg; name m; source Angel Avadí 2014; triangular min 3.6e-5, mostLikely 5.95e-5, max 8.3e-5, pedigree (1,3,4,1,1)
  Mass of nickel emitted
  Uncertainty: 2 samples included this substance
- Oils, unspecified [water, ocean]: 0.564725 kg; name binder; = ABS(mass+a+b+d+e+l+m); source Avadí, A. 2018
  Proxy for the paint's binder, also emitted to ocean
- Tributyltin compounds [water, ocean]: 1.1e-6 kg; name e; source Angel Avadí 2014; triangular min 5e-7, mostLikely 1.1e-6, max 1.7e-6, pedigree (1,3,4,1,1)
  Mass of TBT emitted
  Uncertainty: 2 samples included this substance
- Zinc II [water, ocean]: 0.0508 kg; name d; source Angel Avadí 2014; triangular min 0.00150098, mostLikely 0.0508334, max 0.100066, pedigree (1,3,4,1,1)
  Mass of zinc emitted
  Uncertainty: 2 samples included this substance
