# sweetening, natural gas

Dataset: EcoSpold 2, unit process
Geography: RoW
Time period: 1996-01-01 to 2022-12-31
Technology level: current
Classification: EcoSpold01Categories: natural gas/production
Classification: ISIC rev.4 ecoinvent: 0620:Extraction of natural gas
Tags: ConvertedDataset
Scenario: Business-as-Usual
System model: Allocation at the point of substitution
Share of production covered: 50 %
Generated by: Mireille Faist Emmenegger (obsolete)
Published in: Faist Emmenegger, M. 2007
Database: ecoinvent
isCopyrightProtected: true

## General comment
Data is based on the environmental report of the plant of Grossenkneten.
[This dataset was already contained in the ecoinvent database version 2. It was not individually updated during the transfer to ecoinvent version 3. Life Cycle Impact Assessment results may still have changed, as they are affected by changes in the supply chain, i.e. in other datasets. This dataset was generated following the ecoinvent quality guidelines for version 2. It may have been subject to central changes described in the ecoinvent version 3 change report (http://www.ecoinvent.org/database/ecoinvent-version-3/reports-of-changes/), and the results of the central updates were reviewed extensively. The changes added e.g. consistent water flows and other information throughout the database. The documentation of this dataset can be found in the ecoinvent reports of version 2, which are still available via the ecoinvent website. The change report linked above covers all central changes that were made during the conversion process.]

## Included activities end
Sweetening of sour gas with average 10 Vol.-% of H2S. The data refers to 1 m3 output gas

## Geography
The figures are based on the German data (sweetening plant Grossenkneten).

## Technology
The data is taken out the BEB environmental report 2000. The plant in Grossenkneten is operational since 1972 and is according to BEB one of the biggest and environmental friendliest of the world. It eliminates sulphur compounds to 99.99% from gas. The connected sulphur extraction plant has an extraction rate of 99.8%. The production in Grossenkneten is 4.8 Mrd. m3 gas per year. Sour gas with less as 1% H2S (lean gas) is treated with the Purisol process (physically), sour gas with more sulphur is treated chemically. The solutions used for the gas scrubbing are regenerated and warmed up to 130 °C. By this process a gas mix of H2S and CO2 is released. Subsequently H2S is transformed in elementary sulphur and water in a thermal process by 1'000-2'000°C and in a three-stage catalytic part.

## Time period
Average of 5 last years is used (1996-2000). Emissions per m3 were stable.

## Parameters
- density: 1 kg/m3

## Reference product
- sweetening, natural gas: 1 m3; name NG_sweetened; = 1*35/39; By-product classification allocatable product; CPC 8621: Support services to mining
  Scaled to LHV of ecoinvent v3 based on the German LHV for NG.
  EcoSpold01Location=DE
  production volume 7.57901e10 m3
    Estimated. The gloabl production volume is extrapolated from the German production volume using the nominal GDP of 2015 (source: United Nations, http://data.un.org/Glossary.aspx?q=GDP+%28current+US%24%29, accessed 20170613).
    Gross domestic product (GDP) at current prices is GDP at prices of the current reporting period. Also known as nominal GDP.
    The resulting production volume makes up roughly 2% of total global NG production in 2015. About 40% of global NG resources are estimated to be sour and production of sour gas is expected to increase considerably in the future, i.e. also sweetening volumes can be expected to increase in the future.
  property price 0.0178261 EUR2005
    Calculated based on inputs: The price of the product has been calculated as a sum of the values of the material and energy inputs for this product. This value is therefore a rough estimation. It may underestimate the real price since there are additional expenses when producing any product. These expences can include for example labour costs, treatment of waste materials and profit for the producer. Please consider carefully whether this level of data quality is acceptable for your application.
  properties: carbon allocation 0 kg, carbon content 0

## Inputs from technosphere
- chemical, organic: 2.9533e-6 kg; lognormal variance with pedigree 0.35, pedigree (5,5,5,5,5)
  Estimate
  EcoSpold01Location=GLO
  Uncertainty: estimate
  properties: carbon content, fossil 0.628, dry mass 1 kg, heating value, net 19.03 MJ, wet mass 1 kg
  note on carbon content, fossil: This dataset is an unweighted average of 20 organic substances (listed in Tab 88.1, ecoinvent v2.2 report 8, part II), being part of the top100 chemicals included in this database. The C-content has also been calculated as an unweighted average of the C content of the substances composing this dataset.
- natural gas processing plant: 4.39474e-13 unit; lognormal variance with pedigree 0.0421, pedigree (1,2,5,5,1)
  Environmental report
  EcoSpold01Location=GLO
  Uncertainty: environmental report
- natural gas, high pressure: 0.000236183, 2.62828e-5, 9.96933e-5, 0.000570971, 0.000169443, 0.00958549, 0.000979713, 8.88177e-5, 0.00019113, 0.000161596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 m3 (45 suppliers, which the file names only by identifier); sum of these 0.0362176 m3; lognormal variance with pedigree 0.0421, pedigree (1,2,5,5,1)
  Environmental report
  EcoSpold01Location=DE
  Uncertainty: environmental report
  properties: carbon content, fossil 0.602381, dry mass 0.84 kg, heating value, net 36 MJ, wet mass 0.84 kg
  note on carbon content, fossil: An average C content of 0.506 kg C/ m3 has been assumed (this average has been calculated using data in Tab 3.5, ecoinvent v2.2 report 6_V
  note on heating value, net: Literature value, Source: Christoph Meili;Niels Jungbluth;Maresa Bussa (2021) Life cycle inventories of crude oil and natural gas extraction. ESU-services Ltd. commissioned by BAFU & VSG, Schaffhausen, Switzerland, http://esu-services.ch/data/public-lci-reports/
- sour gas, burned in gas turbine: 1.05166 MJ; lognormal variance with pedigree 0.0421, pedigree (1,2,5,5,1)
  Environmental report
  EcoSpold01Location=NO
  Uncertainty: environmental report
  properties: carbon content, fossil 0.571, dry mass 0.027027 kg, heating value, net 1 MJ, wet mass 0.027027 kg
- transport, pipeline, long distance, natural gas: 0.0975 metric ton*km; = 1.25* density/1000*70
  Estimate. As no global data are available, the average transport distance in Germany of 70km is assumed as average for global; density of sour gas: 1kg/m3 (from: Faist Emmenegger M, Heck T, Jungbluth N, Tuchschmid M (2007) Erdgas. Paul Scherrer Institut&Swiss Centre for Life Cycle Inventories, Villigen& Dübendorf, CH.); volume of sour gas arriving at plant is approximately 1.25 times the volume of treated output gas.

## Emissions to nature
- Carbon dioxide, fossil [air, non-urban air or from high stacks]: 0.165917 kg; lognormal variance with pedigree 0.0421, pedigree (1,2,5,5,1)
  Environmental report, emissions from energy use subtracted
  Uncertainty: environmental report, emissions from energy use subtracted
- Carbon monoxide, fossil [air, non-urban air or from high stacks]: 0.000363703 kg; lognormal variance with pedigree 0.6921, pedigree (1,2,5,5,1)
  Environmental report
  Uncertainty: environmental report
- Methane, fossil [air, non-urban air or from high stacks]: 2.22857e-5 kg; lognormal variance with pedigree 0.0821, pedigree (1,2,5,5,1)
  Environmental report
  Uncertainty: environmental report
- NMVOC, non-methane volatile organic compounds [air, non-urban air or from high stacks]: 0.00445714 kg; lognormal variance with pedigree 0.1621, pedigree (1,2,5,5,1)
  Environmental report
  Uncertainty: environmental report
- Nitrogen oxides [air, non-urban air or from high stacks]: 3.88663e-5 kg; lognormal variance with pedigree 0.0821, pedigree (1,2,5,5,1)
  Environmental report
  Uncertainty: environmental report
- Sulfur dioxide [air, non-urban air or from high stacks]: 0.000803768 kg; lognormal variance with pedigree 0.0421, pedigree (1,2,5,5,1)
  Environmental report
  Uncertainty: environmental report

## Sampling procedure
Data is based on environmental report. No information about the sampling procedure.

## Extrapolations
Data for Germany are extrapolated out of the data for the sweetening plant Grossenkneten. This dataset has been copied from an original dataset covering the geography DE. The uncertainty has been adjusted accordingly.

## Review by Michael Spielmann (obsolete) 2006-09-27
passed
