# chimney production

Dataset: EcoSpold 2, unit process
Geography: CH
Time period: 1993-01-01 to 2022-12-31
Technology level: current
Classification: ISIC rev.4 ecoinvent: 4390:Other specialized construction activities
Classification: EcoSpold01Categories: oil/heating systems
Tags: ConvertedDataset
Scenario: Business-as-Usual
System model: Allocation at the point of substitution
Generated by: Niels Jungbluth
Published in: Jungbluth, N. 2007
Database: ecoinvent
isCopyrightProtected: true

## General comment
Inventory for a chimney with a life time of 80 years.
[This dataset was already contained in the ecoinvent database version 2. It was not individually updated during the transfer to ecoinvent version 3. Life Cycle Impact Assessment results may still have changed, as they are affected by changes in the supply chain, i.e. in other datasets. This dataset was generated following the ecoinvent quality guidelines for version 2. It may have been subject to central changes described in the ecoinvent version 3 change report (http://www.ecoinvent.org/database/ecoinvent-version-3/reports-of-changes/), and the results of the central updates were reviewed extensively. The changes added e.g. consistent water flows and other information throughout the database. The documentation of this dataset can be found in the ecoinvent reports of version 2, which are still available via the ecoinvent website. The change report linked above covers all central changes that were made during the conversion process.]

## Included activities end
Materials for a chimney used for small heating. Disposal of the facilities. Not including energy use for construction.

## Geography
Data for Swiss producers.

## Technology
Chimney used for oil heating in small houses.

## Time period
Materials investigated in 1993.

## Reference product
- chimney: 1 m; By-product classification allocatable product; CPC 54590: Other special trade construction services
  EcoSpold01Location=CH
  production volume 0.0336675 m
    This is a placeholder value that does not reflect real-world production volumes. This dataset does not currently require a real-world production volume to work in the database framework, and no actual data were collected yet. This has no negative effect on the results of the ecoinvent database. The placeholder value of this activity was scaled according to the nominal GDP of 2005 (source: United Nations, http://data.un.org/Glossary.aspx?q=GDP+%28current+US%24%29, accessed 20130726) to reflect an appropriate share of the global production volume, which is also a placeholder value.
  property price 8.67518 EUR2005
    Calculated based on inputs: The price of the product has been calculated as a sum of the values of the material and energy inputs for this product. This value is therefore a rough estimation. It may underestimate the real price since there are additional expenses when producing any product. These expences can include for example labour costs, treatment of waste materials and profit for the producer. Please consider carefully whether this level of data quality is acceptable for your application.
  properties: carbon allocation 0 kg, carbon content 0

## Inputs from technosphere
- concrete, 25MPa: 0.0432 m3; lognormal variance with pedigree 0.054, pedigree (3,4,5,1,1)
  EcoSpold01Location=CH
  Literature
  Uncertainty: Literature
  properties: dry mass 2290 kg, water content 0.0655022, wet mass 2440 kg
- stone wool, packed: 0.5 kg; lognormal variance with pedigree 0.054, pedigree (3,4,5,1,1)
  Literature
  EcoSpold01Location=CH
  Uncertainty: Literature
  properties: carbon content, fossil 0.015401, dry mass 1 kg, wet mass 1 kg
  note on carbon content, fossil: The chemical composition of the glass fibres used in the rock wool production is similar to the composition of naturally cooled volcano basalt and has a composition listed in Tab. 3.1 and 3.2 in ecoinvent v2.2 report 16, part XIV. Rock wool contains: a minimum of 96% mineral fibres,between 0.5 and 3.0 weight percent of phenolic resin depending on the specific product characteristics, and about 0.2 percent mineral oil (ecoinvent v2.2 report 16, part XIV). An average composition of 1.8% phenolic resin, 0.2% mineral oil, and 98% mineral fibres has been assumed and used to calculate C content of the rock wool
- waste concrete: -95 kg; lognormal variance with pedigree 0.016, pedigree (3,4,3,1,1)
  EcoSpold01Location=CH
  Literature
  Uncertainty: Literature
  production volume
    Calculated from the production volume of chimney in proportion to the respective output amounts.
  properties: dry mass 0.5 kg, water content 1, wet mass 1 kg
- waste mineral wool, for final disposal: -0.5 kg; lognormal variance with pedigree 0.016, pedigree (3,4,3,1,1)
  Literature
  EcoSpold01Location=CH
  Uncertainty: Literature
  production volume
    (same comment as for waste concrete)
  properties: dry mass 1 kg, wet mass 1 kg

## Sampling procedure
Data provided by manufacturers.

## Review by Michael Spielmann (obsolete) 2003-07-15
Passed.
