# maintenance, transmission network, electricity, high voltage direct current subsea cable

Dataset: EcoSpold 2, unit process
Geography: RoW
Time period: 1998-01-01 to 2022-12-31
Technology level: current
Classification: ISIC rev.4 ecoinvent: 4220:Construction of utility projects
Classification: EcoSpold01Categories: electricity/distribution
Scenario: Business-as-Usual
System model: Allocation at the point of substitution
Generated by: Heidi Hottenroth
Published in: Arvesen, A. 2014
Database: ecoinvent
isCopyrightProtected: true

## General comment
This dataset represents the maintenance of 1 km and year of an high voltage direct current subsea cable (450 kV, 2x790-mm² copper conductors, mass-impregnated paper insulation, and steel and lead sheeting). Controlling of subsea cable is undertaken by marine vessel.
Literature value for whole network was divided by lifetime (30 a) and length of subsea cable (39800 km) to get yearly values per km.

Source: Arvesen, A., Nes, R.N.; Huertas-Hernando, D, Hertwich, E.G. (2014): Life cycle assessment of an offshore grid interconnecting wind farms and customers across the North Sea. Int J Life Cycle Assess 19: 826-837. p.831, table 2 (export cables)

## Included activities start
Controlling trip by marine vessel

## Geography
The scope of the underlying literature source is Europe. Uncertainty was adjusted accordingly.

## Technology
Maintenance is comprised of a controlling trip by a marine vessel

## Time period
refers to publication date of literature sources

## Reference product
- maintenance, transmission network, electricity, high voltage direct current subsea cable: 1 km*year; By-product classification allocatable product; CPC 54242: General construction services of long-distance communication and power lines (cables)
  production volume 5161 km*year
    calculated according to https://en.wikipedia.org/wiki/List_of_HVDC_projects retrieved on 09.10.2020
    Cumulated global length of subsea cables in the years 1992-2012
  properties: carbon allocation 0 kg, carbon content 0, price 4 EUR2005

## Inputs from technosphere
- diesel, burned in fishing vessel: 1.00503 MJ; = 1200000/30/39800; lognormal variance with pedigree 0.0212, pedigree (4,4,4,5,2)
  Calculated value. Fuel demand for entire network scaled with lifetime (30 a) and subsea cable length (39800 km). Substitution for marine vessles, HFO fuel
  Combustion of diesel in marige engines

## Extrapolations
The dataset is extrapolated from the respective regional dataset with uncertainty adjusted.
