# treatment of wastewater, average, wastewater treatment

Dataset: EcoSpold 2, unit process
Geography: CA-QC
Time period: 2010-01-01 to 2022-12-31
Technology level: current
Classification: ISIC rev.4 ecoinvent: 3700:Sewerage
Scenario: Business-as-Usual
System model: Allocation at the point of substitution
Generated by: Nikolia Stoikou
Database: ecoinvent
isCopyrightProtected: true

## General comment
This dataset represents the treatment of a wastewater, generated from an ordinary transforming activity. Purification in wastewater treatment of 'wastewater, average'. Recommended use of this dataset: to be used for wastewaters, generated from ordinary transforming activities, of equal or similar composition. The wastewater has a content of TOC: 0.1091 kg/m3, COD: 0.42534 kg/m3 and BOD: 0.20572 kg/m3. TOC is equal to C present in the wastewater, COD is calculated as TOC/0.2565 and BOD is calculated as COD/0.53034. Detailed elemental composition can be found in the properties of the wastewater treated. Share of biogenic carbon in the sludge: 100%.

## Included activities start
The activity starts with the wastewater being available at the gate of the treatment facility. Collection and transportation of the wastewater to the treatment plant is not included.

## Included activities end
The activity ends with the wastewater being treated and waste-specific emissions released to the environment. Expenditures from treatment of wastewater in waste treatment plant are included as well as relevant infrastructure of the plant. Emissions from any sludge digestion, biogas generation and utilization (heeding specific wastewater composition) are also included. Waste-specific direct emissions of untreated wastewater and required territory-specific infrastructure for sewers are not contained within this dataset but instead in the regional market datasets for this wastewater.

## Geography
The site has mean annual temperature (MAT) of 2.54054 degC, mean annual precipitation (MAP) of 976.865 mm/year, mean annual actual evaporation (EAT) of 326.303456766609 mm/year. In the WWT plant, 0% of its water input are lost due to evaporation from pools, 0.00474% of water is *gained* from organic mass degradation, and 0.0819% is removed off site via sludge disposal.
Environment Canada, 2022. Canadian Climate Normals, Meteorological Service of Canada Available at: https://climate.weather.gc.ca/climate_normals/index_e.html

## Technology
This activity represents the treatment of a specific wastewater in a WWT plant (while direct emissions and sewering are heeded in the upstream market dataset for this wastewater). The size of the treatment plant infrastructure is for a supranational region average territory situation. The assumed size of the WWTP treats 104 Mio m3 per year. The mixture of WWTP with one, two, or three stages is 19.1%-63.1%-17.9%. The actual, waste-specific oxygen requirement in the biological stages is 0.4028kg O. The generated waste-specific raw sludge mass (dry matter) is 0.1954kg DM. 29% of the raw sludge (DM) is treated with anaerobic digestion. The digestion process produces 92.06 litres of biogas with an energy content of 1.98MJ. 24.1% of the biogas is utilized for energy. The remainder is flared. The gross electric efficiency is 26.564%. The gross thermal efficiency is 47.853%. After digestion, the remaining total sludge mass (dry matter) is 0.5745kg DM.

## Reference product
- iron scrap, sorted, pressed: 1 kg; By-product classification Recyclable; CPC 39310: Slag, dross, scalings and other waste from the manufacture of iron or steel; lognormal variance with pedigree 0.3117, pedigree (1,1,1,1,1)
  scrap output from used infrastructure for wastewater treatment plant.
  Uncertainty: Uncertainty calculated from wastewater technosphere fate uncertainty and treatment infrastructure uncertainty.
  production volume 104545 kg
    Calculated in proportion to wastewater reference product.
  property price 0.175 EUR2005
    Temporary price data. Calculated as 90% of purchasers price based on: 2005 import and export prices (total trades (USD) divided by total weight (kg) in biggest economies of the world: EU27, USA, Brasil, China, India, Japan and Russia) from UN Commodity Trade Statistics Database (http://data.un.org/Explorer.aspxDatabase [Accessed 2011.06.20]). Commodity: Waste or scrap, of cast iron
  properties: carbon allocation 0 kg, carbon content 0, carbon content, fossil 0, carbon content, non-fossil 0, dry mass 1 kg, water content 0, water in wet mass 0 kg, wet mass 1 kg

## Inputs from technosphere
- 1-butanol: 3.84606e-10 kg
- Distiller's Dried Grains with Solubles: -1.65749e-5 kg
- acetic acid, without water, in 98% solution state: 1.21652e-8 kg
- acrylic acid: 4.88037e-10, 2.31677e-9 kg (2 suppliers, which the file names only by identifier); sum of these 2.80481e-9 kg
- acrylic dispersion, with water, in 58% solution state: 9.0834e-11 kg
- acrylic varnish, with water, in 53% solution state: 5.57753e-8 kg
- activated carbon, granular: 7.15601e-8 kg
- aluminium casting facility: 4.47587e-16 unit
- aluminium hydroxide: 5.54409e-8 kg
- aluminium oxide, non-metallurgical: 1.02521e-5 kg
- aluminium scrap, new: -2.46517e-6 kg
- aluminium sulfate, powder: 3.88086e-8 kg
- aluminium, primary, ingot: 2.46517e-6 kg
- ammonia, anhydrous, liquid: 4.04879e-7, 4.24357e-8, 8.93761e-7, 6.42156e-7, 1.55959e-6, 2.08571e-7, 1.89702e-7, 4.48782e-6, 1.34065e-7 kg (9 suppliers, which the file names only by identifier); sum of these 8.56298e-6 kg
- ammonium bicarbonate: 0.000373403, 7.86588e-5 kg (2 suppliers, which the file names only by identifier); sum of these 0.000452062 kg
- ammonium nitrate: 0.000140254, 5.73573e-7, 3.05747e-7, 1.03792e-6 kg (4 suppliers, which the file names only by identifier); sum of these 0.000142171 kg
- ammonium sulfate: 0.000245358, 0.000799575 kg (2 suppliers, which the file names only by identifier); sum of these 0.00104493 kg
- anode, for metal electrolysis: 9.01552e-7 kg
- average incineration residue: -2.21508e-7 kg
- barite: 0.00481586 kg
- bauxite: 1.8031e-5 kg
- bentonite: 0.00481588 kg
- benzaldehyde: 1.27762e-7, 6.30964e-8 kg (2 suppliers, which the file names only by identifier); sum of these 1.90859e-7 kg
- bisphenol A, powder: 2.68067e-5 kg
- blast furnace sludge: -2.47453e-6, -1.44733e-6, -1.62932e-5, -3.67693e-7 kg (4 suppliers, which the file names only by identifier); sum of these -2.05828e-5 kg
- blasting: 6.61547e-6 kg
- borax, anhydrous, powder: 8.62245e-8 kg
- building, hall: 5.94363e-9 m2
- building, multi-storey: 2.98283e-9 m3
- butadiene: 1.12195e-8 kg
- calcium chloride: 2.77204e-8 kg
- calcium nitrate: 5.37459e-8 kg
- carbon dioxide, liquid: 1.32832e-5, 2.78548e-6 kg (2 suppliers, which the file names only by identifier); sum of these 1.60687e-5 kg
- carbon disulfide: 1.25546e-7 kg
- cellulose fibre: 0.00421388 kg
- cement, Portland: 0.0443385, 0.00108316, 0.00163127, 0.00167373, 0.00208063 kg (5 suppliers, which the file names only by identifier); sum of these 0.0508073 kg
- ceramic tile: 1.35127e-8 kg
- charcoal: 2.52938e-9 kg
- chemical factory, organics: 2.92061e-13 unit
- chemical, inorganic: 1.27405e-6 kg
- chemical, organic: 0.00482233 kg
- chlorine, gaseous: 4.30468e-5, 3.39101e-8 kg (2 suppliers, which the file names only by identifier); sum of these 4.30807e-5 kg
- chlorine, liquid: 3.65232e-7, 3.79118e-8 kg (2 suppliers, which the file names only by identifier); sum of these 4.03144e-7 kg
- chromite ore concentrate: 0.000182113 kg
- chromium oxide, flakes: 7.27387e-9 kg
- citric acid: 0.000150687 kg
- clay: 3.74452e-7 kg
- coke: 0.00123645 MJ
- compressed air, 600 kPa gauge: 3.5814e-5 m3
- compressed air, 800 kPa gauge: 4.2649e-5, 1.73547e-5 m3 (2 suppliers, which the file names only by identifier); sum of these 6.00037e-5 m3
- containerboard, fluting medium: 9.11397e-5 kg
- containerboard, linerboard: 0.00018179 kg
- conveyor belt: 1.89428e-9 m
- copper cake: -1.50322e-5 kg
- corrugated board box: 1.81668e-7 kg
- decarbonising waste: -8.01115e-6 kg
- diesel: 1.24991e-5 kg
- diesel, burned in building machine: 0.000485362 MJ
- diesel, burned in diesel-electric generating set, 10MW: 0.026783 MJ
- dolomite: 2.00539e-5 kg
- drilling waste: -0.11221 kg
- electricity, low voltage: 2.55373e-8, 2.20699e-7, 6.93335e-9, 2.30703e-8, 3.10639e-8, 2.13648e-8, 1.17875e-7, 4.1915e-7, 0.000798892, 2.2682e-7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 kWh (48 suppliers, which the file names only by identifier); sum of these 0.0233702 kWh
- electricity, medium voltage: 0.00172206, 0.00232521, 0.00224239, 0.0033441, 0.000698056, 0.00631108, 0.000399206, 0.000708123, 6.12256e-5, 0.00060329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 kWh (157 suppliers, which the file names only by identifier); sum of these 0.950364 kWh
- electricity, medium voltage, cobalt industry: 0.00977838 kWh
- ethanol fermentation plant: 7.98532e-15 unit
- ethanol, without water, in 99.7% solution state, from ethylene: 2.35091e-8, 5.23475e-8 kg (2 suppliers, which the file names only by identifier); sum of these 7.58566e-8 kg
- ethoxylated alcohol (AE7): 1.10708e-7 kg
- ethylene: 0.000169787, 2.72419e-6 kg (2 suppliers, which the file names only by identifier); sum of these 0.000172511 kg
- ethylene dichloride: 1.40209e-5 kg
- ethylene glycol: 1.18269e-9 kg
- ethylene vinyl acetate copolymer: 1.87538e-8 kg
- excavation, hydraulic digger: 0.00012055 m3
- explosive, tovex: 5.39393e-7 kg
- extrusion, plastic pipes: 1.06486e-5 kg
- feldspar: 2.16727e-6 kg
- fibre, cotton: 1.87428e-5 kg
- fibre, silk, short: 3.64306e-7 kg
- flat glass factory: 1.77296e-15 unit
- fluorspar, 97% purity: 3.50588e-7 kg
- fly ash and scrubber sludge: -9.25832e-7 kg
- formaldehyde: 1.46769e-6 kg
- glass cullet, sorted: 1.27008e-5 kg
- hard coal: 4.424e-6, 5.87013e-6, 2.66172e-6, 1.64402e-6, 1.28397e-6, 2.71622e-6, 2.07238e-6, 3.96831e-6, 1.1551e-6, 6.31607e-7 kg (10 suppliers, which the file names only by identifier); sum of these 2.64275e-5 kg
- hazardous waste, for incineration: -0.0112244 kg
- hazardous waste, for underground deposit: -2.92968e-6 kg
- heat and power co-generation unit, 6400kW thermal, building: 1.04524e-12 unit
- heat and power co-generation unit, 6400kW thermal, common components for heat+electricity: 4.18537e-12 unit
- heat and power co-generation unit, 6400kW thermal, components for electricity only: 4.18537e-12 unit
- heat, district or industrial, natural gas: 0.00106977, 0.00525166, 0.000517237, 0.000648868, 0.413087, 0.000214177, 0.00714503 MJ (7 suppliers, which the file names only by identifier); sum of these 0.427933 MJ
- heat, district or industrial, other than natural gas: 0.160302, 7.42649e-5, 0.00113632 MJ (3 suppliers, which the file names only by identifier); sum of these 0.161513 MJ
- heat, from steam, in chemical industry: 0.000547982 MJ
- heavy fuel oil: 1.60325e-5, 1.34907e-7, 6.8584e-7, 8.89297e-7, 1.73065e-7, 2.31674e-7, 3.20424e-6 kg (7 suppliers, which the file names only by identifier); sum of these 2.13516e-5 kg
- hexane: 8.11129e-7 kg
- hydrochloric acid, without water, in 30% solution state: 6.89081e-7, 8.42839e-6 kg (2 suppliers, which the file names only by identifier); sum of these 9.11747e-6 kg
- hydrogen peroxide, without water, in 50% solution state: 2.41412e-7, 4.61828e-8 kg (2 suppliers, which the file names only by identifier); sum of these 2.87595e-7 kg
- hydrogen sulfide: 4.4841e-6, 9.44592e-7 kg (2 suppliers, which the file names only by identifier); sum of these 5.42869e-6 kg
- hydrogen, liquid: 1.91354e-7, 9.18755e-7 kg (2 suppliers, which the file names only by identifier); sum of these 1.11011e-6 kg
- ilmenite, 54% titanium dioxide: 3.87059e-6 kg
- inert waste: -0.000660495, -5.68864e-6, -0.00232816 kg (3 suppliers, which the file names only by identifier); sum of these -0.00299434 kg
- inert waste, for final disposal: -2.21216e-7, -7.64779e-5 kg (2 suppliers, which the file names only by identifier); sum of these -7.66991e-5 kg
- inorganic nitrogen fertiliser, as N: 1.38574e-8, 1.30514e-9, 3.57663e-9, 1.58525e-10, 1.01816e-9, 3.74333e-10, 3.58071e-10, 2.98584e-10, 1.13918e-9, 3.75395e-10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 kg (29 suppliers, which the file names only by identifier); sum of these 1.54698e-7 kg
- iron scrap, sorted, pressed: 2.77204e-7 kg
- iron sulfate: 3.48876e-9, 1.72295e-9 kg (2 suppliers, which the file names only by identifier); sum of these 5.21171e-9 kg
- isobutanol: 4.79038e-9, 1.15439e-8 kg (2 suppliers, which the file names only by identifier); sum of these 1.63343e-8 kg
- isopropanol: 2.7991e-6 kg
- kaolin: 9.3684e-6 kg
- kerosene: 5.80559e-10, 9.82025e-8, 3.47871e-9, 2.00974e-8, 1.10364e-8, 7.37148e-10, 1.42862e-9, 9.45564e-10 kg (8 suppliers, which the file names only by identifier); sum of these 1.36507e-7 kg
- leach residue from copper production: -5.38434e-5 kg
- light fuel oil: 3.63377e-7, 3.60681e-8, 3.468e-9, 7.72145e-8, 2.57729e-9, 2.39343e-9, 1.78711e-8 kg (7 suppliers, which the file names only by identifier); sum of these 5.0297e-7 kg
- lime: 4.10499e-5, 0.00158183 kg (2 suppliers, which the file names only by identifier); sum of these 0.00162288 kg
- lime, hydrated, loose weight: 2.529e-8, 2.97935e-6 kg (2 suppliers, which the file names only by identifier); sum of these 3.00464e-6 kg
- lime, hydrated, packed: 6.70834e-7 kg
- lime, packed: 5.64658e-6 kg
- limestone residue: -0.000299537 kg
- limestone, crushed, for mill: 4.1319e-6, 1.65664e-8, 3.53728e-8 kg (3 suppliers, which the file names only by identifier); sum of these 4.18384e-6 kg
- limestone, crushed, washed: 8.03453e-5, 6.8507e-7 kg (2 suppliers, which the file names only by identifier); sum of these 8.10303e-5 kg
- lubricating oil: 9.97205e-6, 3.42163e-7 kg (2 suppliers, which the file names only by identifier); sum of these 1.03142e-5 kg
- magnesium oxide: 2.71711e-6 kg
- maize grain: 3.05728e-6, 0.000350921, 9.76337e-8, 4.85334e-5 kg (4 suppliers, which the file names only by identifier); sum of these 0.00040261 kg
- maize starch: 7.91871e-6 kg
- manganese: 4.17518e-8 kg
- manganese sulfate: 1.28306e-8 kg
- methyl ethyl ketone: 7.56885e-9 kg
- mine infrastructure, iron: 5.7221e-16 unit
- mine infrastructure, open cast, non-ferrous metal: 7.58935e-14 unit
- mine infrastructure, underground, non-ferrous metal: 1.12756e-14 unit
- molybdenum: 1.99197e-10 kg
- monoammonium phosphate: 5.59426e-5 kg
- municipal solid waste: -9.72925e-5, -1.08875e-9, -3.3341e-5, -0.0654844, -2.33308e-5 kg (5 suppliers, which the file names only by identifier); sum of these -0.0656384 kg
- municipal waste collection service by 21 metric ton lorry: 1.24777e-8 metric ton*km
- naphtha: 2.77819e-7, 1.30969e-5, 2.12417e-6, 5.76152e-7, 2.21819e-8, 9.15431e-8, 2.92387e-6 kg (7 suppliers, which the file names only by identifier); sum of these 1.91127e-5 kg
- natural gas, high pressure: 1.20625e-7, 5.09163e-8, 2.91612e-7, 8.65393e-8, 4.89559e-6, 5.00368e-7, 3.47788e-8, 5.46193e-8, 1.61174e-9, 1.93945e-7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 m3 (27 suppliers, which the file names only by identifier); sum of these 1.46975e-5 m3
- natural gas, low pressure: 1.92801e-6, 6.92354e-7, 5.78564e-7, 1.5017e-6, 1.42157e-6, 2.95399e-5, 1.45362e-6, 1.2629e-6, 2.78865e-7, 1.35682e-5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 m3 (14 suppliers, which the file names only by identifier); sum of these 5.47002e-5 m3
- nickel smelter slag: -0.000462096 kg
- nitric acid, without water, in 50% solution state: 6.51421e-10, 8.47449e-9, 9.67909e-10, 2.40701e-9, 3.13025e-9, 1.15331e-9, 3.96665e-9, 1.04574e-9, 9.64327e-10, 4.58893e-7 kg (10 suppliers, which the file names only by identifier); sum of these 4.81654e-7 kg
- nitrogen, liquid: 4.10036e-5, 6.45207e-7 kg (2 suppliers, which the file names only by identifier); sum of these 4.16488e-5 kg
- non-ferrous metal smelter: 5.16805e-16 unit
- non-sulfidic overburden, off-site: -0.384528 kg
- non-sulfidic tailing, off-site: -0.000596927 kg
- oil mill: 2.65813e-13 unit
- oxygen, liquid: 1.21198e-6, 1.59875e-5 kg (2 suppliers, which the file names only by identifier); sum of these 1.71995e-5 kg
- packaging box factory: 3.49342e-13 unit
- packaging film, low density polyethylene: 2.10353e-7 kg
- palm fruit bunch: 0.00120616 kg
- paraffin: 1.54768e-10 kg
- perlite: 2.61703e-7 kg
- petroleum: 1.43681e-6, 2.56741e-6, 6.45151e-9, 5.55907e-6 kg (4 suppliers, which the file names only by identifier); sum of these 9.56974e-6 kg
- petroleum coke: 8.99666e-6 kg
- phenol: 4.68512e-7 kg
- phenolic resin: 1.92176e-7 kg
- phosgene, liquid: 1.16156e-5 kg
- phosphoric acid, industrial grade, without water, in 85% solution state: 2.41402e-7 kg
- polyacrylamide: 9.14078e-8 kg
- polyethylene terephthalate, granulate, amorphous: 0.000367923 kg
- polyvinylchloride, suspension polymerised: 1.00458e-5 kg
- potassium carbonate: 0.00361189 kg
- potassium chloride: 4.85613e-5 kg
- potassium hydroxide: 1.14628e-7 kg
- printing ink, offset, without solvent, in 47.5% solution state: 5.89584e-7 kg
- process-specific burdens, inert material landfill: 1.24738e-5, 1.05882e-7 kg (2 suppliers, which the file names only by identifier); sum of these 1.25797e-5 kg
- propane: 1.53991e-5 kg
- propane, burned in building machine: 5.40106e-7 MJ
- propylene: 1.47435e-6, 7.69766e-5 kg (2 suppliers, which the file names only by identifier); sum of these 7.8451e-5 kg
- propylene glycol, liquid: 8.20851e-8 kg
- quicklime, milled, loose: 9.8491e-8, 0.000149285 kg (2 suppliers, which the file names only by identifier); sum of these 0.000149384 kg
- recultivation, iron mine: 7.34773e-8 m2
- refinery sludge: -2.53759e-7, -2.44637e-6, -1.16112e-8 kg (3 suppliers, which the file names only by identifier); sum of these -2.71175e-6 kg
- refractory, fireclay, packed: 2.53287e-7 kg
- reinforcing steel: 0.074405 kg
- residue from TiO2 production, chloride process: -5.42862e-7 kg
- residue from TiO2 production, sulfate process: -7.83564e-7 kg
- rosin size, for paper production: 5.48191e-9 kg
- rutile, 95% titanium dioxide: 9.89197e-7 kg
- scrap steel: -3.7484e-6 kg
- sewage sludge, dried: -9.1092e-8 kg
- silica sand: 3.57513e-5 kg
- silicon carbide: 5.64892e-7 kg
- silicone product: 4.73293e-7 kg
- sludge from pulp and paper production: -4.71471e-7 kg
- soda ash, light: 9.81429e-6 kg
- sodium borates: 9.17902e-7 kg
- sodium chloride, powder: 0.00144479 kg
- sodium hydroxide, without water, in 50% solution state: 0.000279905 kg
- sodium nitrite: 3.28341e-9 kg
- sodium percarbonate, powder: 1.36818e-6, 2.77039e-6 kg (2 suppliers, which the file names only by identifier); sum of these 4.13857e-6 kg
- sodium persulfate: 2.05563e-7 kg
- sodium phosphate: 2.67058e-13, 5.62568e-14 kg (2 suppliers, which the file names only by identifier); sum of these 3.23315e-13 kg
- sodium sulfate, anhydrite: 3.76538e-7, 6.15019e-8 kg (2 suppliers, which the file names only by identifier); sum of these 4.3804e-7 kg
- sodium tetrahydridoborate: 1.85501e-11 kg
- solvent, organic: 5.79753e-7 kg
- spent solvent mixture: -6.80577e-6, -2.01035e-14, -8.5808e-13 kg (3 suppliers, which the file names only by identifier); sum of these -6.80577e-6 kg
- steam, in chemical industry: 2.11904e-5 kg
- steel, chromium steel 18/8: 3.73923e-6 kg
- steel, low-alloyed: 0.000123987 kg
- steel, low-alloyed, hot rolled: 3.73856e-8 kg
- steel, unalloyed: 1.59681e-7 kg
- stone wool factory: 7.05956e-15 unit
- styrene: 1.12195e-8 kg
- sugar beet: 0.00818676 kg
- sugar beet pulp: -0.00167026 kg
- sugar refinery: 1.28483e-13 unit
- sulfidic tailings, from nickel mine operation: -0.000403647, -0.000113346, -8.48741e-5, -0.000351389 kg (4 suppliers, which the file names only by identifier); sum of these -0.000953257 kg
- sulfidic tailings, generic: -0.000597169 kg
- sulfur: 6.13553e-7 kg
- sulfur dioxide, liquid: 3.77958e-7, 9.40803e-7 kg (2 suppliers, which the file names only by identifier); sum of these 1.31876e-6 kg
- sulfuric acid: 0.000286272, 2.98077e-5 kg (2 suppliers, which the file names only by identifier); sum of these 0.000316079 kg
- tap water: 0.016093, 0.00668696, 0.447402, 0.0177427, 0.0331071, 5.12809, 0.011639, 0.00359857, 0.089188 kg (9 suppliers, which the file names only by identifier); sum of these 5.75355 kg
- tetraethyl orthosilicate: 7.2736e-6 kg
- tin: 6.73874e-11 kg
- titanium dioxide: 2.38475e-7 kg
- titanium tetrachloride: 8.80986e-8 kg
- transport, freight train: 0.000164284 metric ton*km
- transport, freight, inland waterways, barge: 5.27187e-6 metric ton*km
- transport, freight, lorry 16-32 metric ton, EURO4: 3.63698e-5, 4.23725e-6 metric ton*km (2 suppliers, which the file names only by identifier); sum of these 4.0607e-5 metric ton*km
- transport, freight, lorry >32 metric ton, EURO4: 0.000244644, 2.85021e-5 metric ton*km (2 suppliers, which the file names only by identifier); sum of these 0.000273146 metric ton*km
- transport, freight, lorry, unspecified: 6.30178e-10 metric ton*km
- transport, freight, sea, bulk carrier for dry goods: 0.000670463 metric ton*km
- transport, tractor and trailer, agricultural: 8.23824e-5, 2.09338e-9 metric ton*km (2 suppliers, which the file names only by identifier); sum of these 8.23845e-5 metric ton*km
- urea: 1.3187e-6 kg
- vinyl acetate: 1.07328e-7 kg
- vinyl chloride: 0.000126521 kg
- waste emulsion paint, separated: -4.58719e-9 kg
- waste gypsum: -1.16278e-5, -0.000245983, -0.00267935 kg (3 suppliers, which the file names only by identifier); sum of these -0.00293696 kg
- waste mineral oil: -5.19528e-8, -1.28466e-5, -2.09859e-6 kg (3 suppliers, which the file names only by identifier); sum of these -1.49971e-5 kg
- waste paint on metal: -2.82112e-8 kg
- waste paperboard: -1.9753e-9, -1.28832e-9, -2.57188e-7, -1.29354e-8, -1.49253e-8, -6.95973e-10, -3.78414e-9, -6.51407e-6, -1.72722e-10 kg (9 suppliers, which the file names only by identifier); sum of these -6.80703e-6 kg
- waste plastic, mixture: -1.22759e-7, -6.20327e-10, -1.36865e-9, -6.39489e-6, -8.2023e-9, -3.21708e-9, -3.38785e-9 kg (7 suppliers, which the file names only by identifier); sum of these -6.53444e-6 kg
- waste polyethylene: -1.07885e-8 kg
- waste x-ray film: -5.21752e-7 kg
- waste yarn and waste textile: -1.02836e-6 kg
- wastewater from maize starch production: -3.55034e-10 m3
- wastewater, average: -1.09494e-6, -2.53139e-5, -0.00586455, -3.00743e-5 m3 (4 suppliers, which the file names only by identifier); sum of these -0.00592103 m3
- wastewater, unpolluted: -1.08731e-5 m3
- water, decarbonised: 0.00682199, 0.000909049, 4.6824e-5, 1.47483e-7, 0.000232268, 4.46285e-5, 0.000153966, 0.00579095, 0.00366641, 0.000282141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 kg (13 suppliers, which the file names only by identifier); sum of these 0.0187731 kg
- water, deionised: 8.76463e-5, 0.0243479, 0.0791822 kg (3 suppliers, which the file names only by identifier); sum of these 0.103618 kg
- water, harvested from rainwater: 9.94413e-6 kg
- wax, lost-wax casting: 5.05972e-6 kg
- welding, arc, steel: 8.3094e-10 m
- wood ash mixture, pure: -1.51863e-8, -7.38762e-7, -1.54039e-6 kg (3 suppliers, which the file names only by identifier); sum of these -2.29434e-6 kg
- yarn, cotton: 6.92795e-6 kg
- zircon: 3.20259e-6 kg

## Inputs from nature
- Aluminium [natural resource, in ground]: 3.56295e-5 kg
- Arsenic [natural resource, in ground]: 8.71332e-8 kg
- Boron [natural resource, in ground]: 9.84414e-5 kg
- Calcium [natural resource, in ground]: 5.48939e-6 kg
- Carbon dioxide, in air [natural resource, in air]: 0.000600345 kg
- Chromium [natural resource, in ground]: 1.20639e-5 kg
- Clay, unspecified [natural resource, in ground]: 0.357631 kg
- Cobalt [natural resource, in ground]: 4.04166e-6 kg
- Copper [natural resource, in ground]: 8.5345e-5 kg
- Gangue [natural resource, in ground]: 0.0280706 kg
- Gold [natural resource, in ground]: 2.61414e-12 kg
- Iron [natural resource, in ground]: 0.00120167 kg
- Lead [natural resource, in ground]: 8.71332e-8 kg
- Magnesium [natural resource, in ground]: 5.62172e-5 kg
- Manganese [natural resource, in ground]: 6.5112e-6 kg
- Nickel [natural resource, in ground]: 5.44012e-5 kg
- Occupation, construction site [natural resource, land]: 7.01843e-10 m2*year
- Occupation, industrial area [natural resource, land]: 3.74784e-6 m2*year
- Occupation, mineral extraction site [natural resource, land]: 0.000178181 m2*year
- Oxygen [natural resource, in air]: 7.89775e-5 kg
- Silicon [natural resource, in ground]: 0.000219331 kg
- Silver [natural resource, in ground]: 4.70546e-11 kg
- Sodium chloride [natural resource, in ground]: 0.000267038 kg
- Strontium [natural resource, in ground]: 0.000184123 kg
- Sulfur [natural resource, in ground]: 0.000697263 kg
- Transformation, from forest, unspecified [natural resource, land]: 7.231e-8 m2
- Transformation, from unspecified [natural resource, land]: 1.5642e-6 m2
- Transformation, from unspecified, natural (non-use) [natural resource, land]: 0.000144476 m2
- Transformation, to industrial area [natural resource, land]: 0.000144569 m2
- Transformation, to mineral extraction site [natural resource, land]: 1.54326e-6 m2
- Water, cooling, unspecified natural origin [natural resource, in water]: 1.67081e-5 m3
- Water, lake [natural resource, in water]: 8.05255e-7 m3
- Water, river [natural resource, in water]: 1.08841e-6 m3
- Water, salt, ocean [natural resource, in water]: 7.49073e-9 m3
- Water, unspecified natural origin [natural resource, in water]: 8.7943e-5 m3
- Water, well, in ground [natural resource, in water]: 0.000122687 m3
- Zinc [natural resource, in ground]: 1.74266e-7 kg

## Emissions to nature
- 2-Propanol [air, unspecified]: 3.01958e-10 kg
- Acetaldehyde [air, urban air close to ground]: 2.64559e-10 kg
- Acetic acid [air, unspecified]: 9.78016e-13 kg
- Aluminium III [air, non-urban air or from high stacks]: 2.28273e-7 kg
- Ammonia [air, unspecified]: 3.22474e-8 kg
- Ammonia [air, urban air close to ground]: 6.9705e-8 kg
- Arsenic ion [air, non-urban air or from high stacks]: 3.20206e-11 kg
- Arsenic ion [air, unspecified]: 1.48278e-9 kg
- Arsenic ion [air, urban air close to ground]: 4.3371e-12 kg
- Benzene [air, urban air close to ground]: 3.81098e-9 kg
- Benzene, ethyl- [air, urban air close to ground]: 1.25633e-10 kg
- Benzene, hexachloro- [air, urban air close to ground]: 3.01527e-17 kg
- Benzo(a)pyrene [air, urban air close to ground]: 2.09389e-12 kg
- Bromine [air, urban air close to ground]: 2.60229e-10 kg
- Cadmium II [air, urban air close to ground]: 3.03602e-12 kg
- Calcium [air, non-urban air or from high stacks]: 1.59791e-7 kg
- Calcium [air, unspecified]: 2.63833e-10 kg
- Calcium [air, urban air close to ground]: 2.53727e-8 kg
- Carbon dioxide, fossil [air, non-urban air or from high stacks]: 0.000726934 kg
- Carbon dioxide, fossil [air, unspecified]: 0.000119206 kg
- Carbon dioxide, non-fossil [air, urban air close to ground]: 0.00113912 kg
- Carbon monoxide, fossil [air, non-urban air or from high stacks]: 9.29883e-7 kg
- Carbon monoxide, fossil [air, unspecified]: 2.11657e-7 kg
- Carbon monoxide, non-fossil [air, urban air close to ground]: 2.93157e-8 kg
- Carbonyl sulfide [air, unspecified]: 2.08928e-9 kg
- Chlorine [air, unspecified]: 1.74917e-10 kg
- Chlorine [air, urban air close to ground]: 7.80686e-10 kg
- Chloroethylene [air, unspecified]: 8.00822e-9 kg
- Chloroform [air, unspecified]: 1.88159e-10 kg
- Chromium III [air, non-urban air or from high stacks]: 2.88499e-7 kg
- Chromium III [air, unspecified]: 3.88722e-7 kg
- Chromium III [air, urban air close to ground]: 1.71745e-11 kg
- Chromium VI [air, non-urban air or from high stacks]: 7.21241e-9 kg
- Chromium VI [air, urban air close to ground]: 1.73482e-13 kg
- Cobalt II [air, non-urban air or from high stacks]: 1.87333e-9 kg
- Cobalt II [air, unspecified]: 1.07537e-9 kg
- Copper ion [air, non-urban air or from high stacks]: 4.56547e-8 kg
- Copper ion [air, unspecified]: 2.39473e-8 kg
- Copper ion [air, urban air close to ground]: 9.54167e-11 kg
- Cyanide [air, non-urban air or from high stacks]: 2.52434e-9 kg
- Dinitrogen monoxide [air, non-urban air or from high stacks]: 7.44479e-10 kg
- Dinitrogen monoxide [air, unspecified]: 4.32712e-9 kg
- Dinitrogen monoxide [air, urban air close to ground]: 9.97541e-9 kg
- Dioxins, measured as 2,3,7,8-tetrachlorodibenzo-p-dioxin [air, non-urban air or from high stacks]: 7.21241e-17 kg
- Dioxins, measured as 2,3,7,8-tetrachlorodibenzo-p-dioxin [air, unspecified]: 1.66357e-18 kg
- Dioxins, measured as 2,3,7,8-tetrachlorodibenzo-p-dioxin [air, urban air close to ground]: 1.29819e-16 kg
- Ethane, 1,2-dichloro- [air, unspecified]: 5.95518e-9 kg
- Ethylene [air, unspecified]: 9.16708e-8 kg
- Fluorine [air, unspecified]: 1.43422e-9 kg
- Fluorine [air, urban air close to ground]: 5.08223e-10 kg
- Formaldehyde [air, unspecified]: 7.33047e-9 kg
- Formaldehyde [air, urban air close to ground]: 5.44424e-10 kg
- Hexane [air, urban air close to ground]: 8.11129e-7 kg
- Hydrocarbons, aliphatic, alkanes, unspecified [air, urban air close to ground]: 3.81098e-9 kg
- Hydrocarbons, aliphatic, unsaturated [air, urban air close to ground]: 1.29819e-8 kg
- Hydrochloric acid [air, unspecified]: 2.02147e-9 kg
- Hydrogen [air, unspecified]: 2.36511e-5 kg
- Hydrogen fluoride [air, unspecified]: 1.54491e-10 kg
- Hydrogen sulfide [air, unspecified]: 2.06473e-9 kg
- Lead II [air, non-urban air or from high stacks]: 5.08295e-12 kg
- Lead II [air, unspecified]: 9.88077e-9 kg
- Lead II [air, urban air close to ground]: 1.07995e-10 kg
- Magnesium [air, non-urban air or from high stacks]: 1.36964e-7 kg
- Magnesium [air, urban air close to ground]: 1.56571e-9 kg
- Manganese II [air, unspecified]: 3.58694e-12 kg
- Manganese II [air, urban air close to ground]: 7.41642e-10 kg
- Mercury II [air, unspecified]: 1.96283e-10 kg
- Mercury II [air, urban air close to ground]: 1.30108e-12 kg
- Methane, fossil [air, non-urban air or from high stacks]: 1.44288e-9 kg
- Methane, fossil [air, unspecified]: 2.3582e-9 kg
- Methane, non-fossil [air, urban air close to ground]: 1.81756e-9 kg
- Methane, tetrachloro-, R-10 [air, unspecified]: 9.99482e-11 kg
- Monochloroethane [air, unspecified]: 1.57134e-10 kg
- NMVOC, non-methane volatile organic compounds [air, non-urban air or from high stacks]: 1.76955e-7 kg
- NMVOC, non-methane volatile organic compounds [air, unspecified]: 2.29092e-6 kg
- NMVOC, non-methane volatile organic compounds [air, urban air close to ground]: 2.55464e-9 kg
- Nickel II [air, non-urban air or from high stacks]: 5.61503e-8 kg
- Nickel II [air, unspecified]: 1.53661e-8 kg
- Nickel II [air, urban air close to ground]: 2.60229e-11 kg
- Nitrogen [air, unspecified]: 2.4483e-5 kg
- Nitrogen oxides [air, non-urban air or from high stacks]: 4.2964e-7 kg
- Nitrogen oxides [air, unspecified]: 1.4095e-7 kg
- Nitrogen oxides [air, urban air close to ground]: 3.81665e-7 kg
- PAH, polycyclic aromatic hydrocarbons [air, urban air close to ground]: 4.60668e-11 kg
- Palladium II [air, unspecified]: 1.23317e-13 kg
- Particulate Matter, < 2.5 um [air, non-urban air or from high stacks]: 1.9879e-6 kg
- Particulate Matter, < 2.5 um [air, unspecified]: 5.38821e-9 kg
- Particulate Matter, < 2.5 um [air, urban air close to ground]: 1.8804e-7 kg
- Particulate Matter, > 10 um [air, non-urban air or from high stacks]: 5.28425e-7 kg
- Particulate Matter, > 10 um [air, unspecified]: 4.99351e-7 kg
- Particulate Matter, > 10 um [air, urban air close to ground]: 1.07467e-5 kg
- Particulate Matter, > 2.5 um and < 10um [air, non-urban air or from high stacks]: 8.55037e-7 kg
- Particulate Matter, > 2.5 um and < 10um [air, unspecified]: 6.04215e-7 kg
- Particulate Matter, > 2.5 um and < 10um [air, urban air close to ground]: 2.91368e-8 kg
- Phenol [air, unspecified]: 4.14331e-9 kg
- Phenol, pentachloro- [air, urban air close to ground]: 3.3922e-14 kg
- Phosphorus [air, urban air close to ground]: 1.30108e-9 kg
- Platinum [air, non-urban air or from high stacks]: 1.87333e-12 kg
- Potassium I [air, urban air close to ground]: 1.01489e-7 kg
- Propanol [air, urban air close to ground]: 1.76607e-6 kg
- Propene [air, unspecified]: 4.52883e-9 kg
- Selenium IV [air, unspecified]: 1.40716e-10 kg
- Silver I [air, non-urban air or from high stacks]: 1.96017e-11 kg
- Silver I [air, unspecified]: 1.59157e-13 kg
- Sodium [air, urban air close to ground]: 5.63831e-9 kg
- Sulfur dioxide [air, non-urban air or from high stacks]: 3.42537e-7 kg
- Sulfur dioxide [air, unspecified]: 4.28624e-6 kg
- Sulfur dioxide [air, urban air close to ground]: 1.07995e-8 kg
- Sulfur hexafluoride [air, unspecified]: 1.4762e-13 kg
- Sulfur trioxide [air, unspecified]: 2.62556e-7 kg
- Sulfuric acid [air, unspecified]: 3.9677e-9 kg
- Tin ion [air, unspecified]: 6.71667e-11 kg
- Toluene [air, urban air close to ground]: 1.25633e-9 kg
- Trichloroethylene [air, unspecified]: 6.2454e-11 kg
- VOC, volatile organic compounds [air, unspecified]: 1.1367e-8 kg
- Vanadium V [air, non-urban air or from high stacks]: 4.62086e-11 kg
- Vanadium V [air, unspecified]: 4.80573e-13 kg
- Water [air, non-urban air or from high stacks]: 1.41735e-7 m3
- Water [air, unspecified]: 0.000885735 m3
- Water [air, urban air close to ground]: 5.26243e-7 m3
- Zinc II [air, unspecified]: 1.98525e-9 kg
- Zinc II [air, urban air close to ground]: 1.30108e-9 kg
- m-Xylene [air, urban air close to ground]: 5.02546e-10 kg
- Sulfur [soil, industrial]: 1.73835e-8 kg
- AOX, Adsorbable Organic Halogen [water, unspecified]: 2.69396e-10 kg
- Aluminium III [water, surface water]: 2.00503e-9 kg
- Aluminium III [water, unspecified]: 9.32869e-11 kg
- Ammonium [water, ground-]: 3.41558e-5 kg
- Ammonium [water, surface water]: 0.000351606 kg
- Ammonium [water, unspecified]: 1.59387e-9 kg
- Antimony ion [water, surface water]: 2.00503e-9 kg
- Arsenic ion [water, ocean]: 1.34422e-11 kg
- Arsenic ion [water, surface water]: 3.34492e-9 kg
- Arsenic ion [water, unspecified]: 2.98687e-13 kg
- BOD5, Biological Oxygen Demand [water, surface water]: 2.25101e-8 kg
- BOD5, Biological Oxygen Demand [water, unspecified]: 2.47317e-7 kg
- Benzene, hexachloro- [water, unspecified]: 8.10939e-15 kg
- Benzene, pentachloro- [water, unspecified]: 1.33068e-14 kg
- Boron [water, surface water]: 2.20553e-7 kg
- COD, Chemical Oxygen Demand [water, surface water]: 5.1286e-7 kg
- COD, Chemical Oxygen Demand [water, unspecified]: 1.31903e-6 kg
- Cadmium II [water, ocean]: 1.60851e-12 kg
- Cadmium II [water, surface water]: 2.01009e-10 kg
- Cadmium II [water, unspecified]: 1.55667e-12 kg
- Calcium II [water, surface water]: 3.34171e-5 kg
- Chloride [water, surface water]: 0.000167085 kg
- Chloride [water, unspecified]: 9.11677e-6 kg
- Chlorides, unspecified [water, unspecified]: 1.43365e-7 kg
- Chloroethylene [water, unspecified]: 3.93568e-11 kg
- Chloroform [water, unspecified]: 1.04343e-12 kg
- Chromium III [water, surface water]: 2.00577e-9 kg
- Chromium III [water, unspecified]: 6.73936e-10 kg
- Cobalt II [water, ocean]: 1.73624e-10 kg
- Cobalt II [water, surface water]: 1.36e-9 kg
- Copper ion [water, ocean]: 3.6901e-11 kg
- Copper ion [water, surface water]: 2.52912e-9 kg
- Copper ion [water, unspecified]: 6.883e-10 kg
- Cyanide [water, surface water]: 1.27895e-12 kg
- DOC, Dissolved Organic Carbon [water, surface water]: 6.78476e-7 kg
- Dioxins, measured as 2,3,7,8-tetrachlorodibenzo-p-dioxin [water, unspecified]: 2.89954e-18 kg
- Dissolved solids [water, surface water]: 1.08186e-9 kg
- Ethane, 1,2-dichloro- [water, unspecified]: 8.74109e-12 kg
- Fluoride [water, ocean]: 2.62231e-8 kg
- Fluoride [water, surface water]: 1.00251e-7 kg
- Fluoride [water, unspecified]: 4.13541e-11 kg
- Hydrochloric acid [water, unspecified]: 1.39868e-8 kg
- Hydrogen sulfide [water, surface water]: 6.43835e-11 kg
- Iron ion [water, ocean]: 8.35352e-9 kg
- Iron ion [water, surface water]: 2.00503e-9 kg
- Iron ion [water, unspecified]: 3.52751e-8 kg
- Lead II [water, surface water]: 3.38994e-10 kg
- Lead II [water, unspecified]: 6.71304e-10 kg
- Lead-210 [water, surface water]: 3.14121e-5 kBq
- Magnesium [water, surface water]: 6.68342e-6 kg
- Manganese II [water, surface water]: 3.34171e-9 kg
- Mercury II [water, ocean]: 1.66826e-13 kg
- Mercury II [water, surface water]: 2.00503e-10 kg
- Mercury II [water, unspecified]: 5.84284e-13 kg
- Methane, tetrachloro-, R-10 [water, unspecified]: 6.39335e-13 kg
- Molybdenum VI [water, surface water]: 2.00503e-9 kg
- Nickel II [water, ocean]: 2.41923e-10 kg
- Nickel II [water, surface water]: 2.62276e-9 kg
- Nickel II [water, unspecified]: 6.72573e-10 kg
- Nitrate [water, surface water]: 3.34171e-6 kg
- Nitrate [water, unspecified]: 1.11984e-10 kg
- Nitrogen [water, ocean]: 9.356e-8 kg
- Nitrogen [water, surface water]: 4.46764e-8 kg
- Nitrogen [water, unspecified]: 8.24392e-8 kg
- Nitrogen, organic bound [water, unspecified]: 1.72506e-9 kg
- PAH, polycyclic aromatic hydrocarbons [water, surface water]: 4.68807e-12 kg
- Phosphate [water, surface water]: 1.33668e-9 kg
- Phosphorus [water, surface water]: 3.20504e-9 kg
- Phosphorus [water, unspecified]: 1.69782e-8 kg
- Polonium-210 [water, surface water]: 3.14121e-5 kBq
- Potassium I [water, surface water]: 3.34171e-8 kg
- Potassium-40 [water, surface water]: 3.94322e-5 kBq
- Radium-226 [water, surface water]: 1.93819e-5 kBq
- Selenium IV [water, surface water]: 3.34171e-10 kg
- Sodium I [water, surface water]: 1.67085e-6 kg
- Sodium I [water, unspecified]: 5.56394e-6 kg
- Sulfate [water, surface water]: 6.68342e-6 kg
- Sulfate [water, unspecified]: 0.00083236 kg
- Sulfite [water, surface water]: 6.68342e-8 kg
- Sulfuric acid [water, surface water]: 1.13897e-8 kg
- Suspended solids, unspecified [water, surface water]: 7.2518e-8 kg
- Suspended solids, unspecified [water, unspecified]: 3.67645e-8 kg
- TOC, Total Organic Carbon [water, surface water]: 6.78476e-7 kg
- Thorium-232 [water, surface water]: 7.35176e-6 kBq
- Tin ion [water, surface water]: 2.00503e-9 kg
- Titanium ion [water, unspecified]: 3.35512e-9 kg
- Uranium-238 [water, surface water]: 1.53719e-5 kBq
- Vanadium V [water, surface water]: 2.00503e-9 kg
- Water [water, surface water]: 1.18002e-6 m3
- Water [water, unspecified]: 2.29539e-5 m3
- Zinc II [water, ocean]: 1.19268e-11 kg
- Zinc II [water, surface water]: 3.38523e-9 kg
- Zinc II [water, unspecified]: 7.26329e-10 kg
