# treatment of sewage sludge, 75% water, WWT, WW from particle board production, sanitary landfill

Dataset: EcoSpold 2, unit process
Geography: RoW
Time period: 1994-01-01 to 2022-12-31
Technology level: current
Classification: ISIC rev.4 ecoinvent: 3821:Treatment and disposal of non-hazardous waste
Scenario: Business-as-Usual
System model: Allocation at the point of substitution
Generated by: Nikolia Stoikou
Database: ecoinvent
isCopyrightProtected: true

## General comment
The process represents the treatment of a waste (sewage sludge) that is exclusively generated from another waste treatment. Sewage sludge is generated in the wastewater treatment of 'wastewater from particle board production'. Recommended use of this dataset: to be used within the specific chain of treatments for 'wastewater from particle board production'. Share of biogenic carbon in the sludge: 98.972%. Landfill gas capture and utilisation generates 0.03321 kWh of electricity and 0.0599 MJ of useful heat. 0.002598 kg waste mass remains in the landfill even after the long term period.

## Included activities start
The activity starts with the waste being available at the gate of the treatment facility. Collection and transportation of the waste to the treatment plant is not included.

## Included activities end
The activity ends with the waste being treated and waste-specific emissions from the landfill are released to the environment (air due to landfil gas and water due to landfil leachate).

## Geography
Landfill site with mean annual temperature (MAT) of 16.743579766537 degC, mean annual precipitation (MAP) of 1250.84108527132 mm/year, and net infiltration of 790.252035689178 mm/year.The leachate percolating through the landfill has an average residence time of 6.33 years.
References: UN data, 2020. Precipitation, Environment Statistics Database, United Nations Statistics Division Available at: http://data.un.org/Data.aspx?q=precipitation&d=ENV&f=variableID%3a6;
World Bank, 2022. Surface area (sq.km), World Bank Group Available at: https://data.worldbank.org/indicator/AG.SRF.TOTL.K2;
Doka G.,2021. A model for composition-specific life cycle inventories of regionalised wastewater fates, Zurich, Switzerland. http://www.doka.ch/publications.htm

## Technology
Sanitary (controlled) landfill for municipal solid waste. Ultimate average landfill height is 20 meters. Operation phase duration is 30 years. The total raw landfill gas mass produced in the landfill from this waste is 0.1453 kg. The total CH4 mass in the raw landfill gas is 0.08233 kg. Percentage of landfill gas directly emitted is 47w%. Percentage of landfill gas captured and flared is 18.02w%. Percentage of landfill gas captured and utilised is 34.98%. Conversion efficiencies are 27.8e% for electricity and 13.5e% for useful heat. Leachate generated during the first 100 years is collected and treated region-specifically before emission. Based on average waste composition and climate data the end of carbonate phase is estimated to be reached 2'863 years after waste deposition.

## Reference product
- heat, district or industrial, other than natural gas: 1 MJ; By-product classification allocatable product; CPC 17300: Steam and hot water; lognormal variance with pedigree 0.16012, pedigree (1,1,1,1,1)
  Net production of heat from landfill gas utilisation.
  Uncertainty: Uncertainty calculated depending on waste input and uncertainty of transfer coefficients in landfill to landfill gas, uncertainty in gas capture and utilisation.
  production volume 268.377 MJ
    Calculated from the production volume of the reference product in proportion to the respective output amounts.
  property corresponding fuel use, propane, furnace >100kW 0 MJ; name fuel_use
    Lower heating value of the fuel input related to the heat/electricity output, taken directly from ecoinvent v3.0 dataset "heat production, natural gas, at industrial furnace >100kW, GLO 2000".
  property price 0.0106 EUR2005
    Average European district heat price from Ecoheatcool and Euroheat 2005-2006, Ecoheat Work package 1: The European heat market. Final report. 10.6 EUR/GJ i s the price of district heat. http://www.solarthermalworld.org/files/Ecoheatcool%20WP1%20Web.pdf?download
  properties: carbon allocation 0 kg, carbon content 0, carbon content, fossil 0, carbon content, non-fossil 0, dry mass 1 kg, heating value, net 1 MJ, water content 0, water in wet mass 0 kg, wet mass 1 kg

## Inputs from technosphere
- agricultural trailer: 4.52148e-7 kg
- aluminium sulfate, powder: 1.20192e-5 kg
- aluminium, cast alloy: 1.07805e-5 kg
- ammonium sulfate: 4.17985e-8, 1.36641e-7 kg (2 suppliers, which the file names only by identifier); sum of these 1.78439e-7 kg
- bark chips, wet, measured as dry mass: 4.09596e-8, 1.97368e-6, 4.62123e-7, 6.3396e-9 kg (4 suppliers, which the file names only by identifier); sum of these 2.4831e-6 kg
- biowaste: -3.69645e-5 kg
- building, hall: 6.35697e-10 m2
- cast iron: 1.07805e-5 kg
- chemical, organic: 5.3736e-6 kg
- chromium steel pipe: 9.5642e-8 kg
- corrugated board box: 6.26208e-7, 1.45349e-6, 5.6867e-7, 2.33263e-8 kg (4 suppliers, which the file names only by identifier); sum of these 2.6717e-6 kg
- diesel: 1.68602e-8, 1.70698e-9, 3.5231e-8, 1.18099e-9, 1.66486e-7, 4.01609e-10 kg (6 suppliers, which the file names only by identifier); sum of these 2.21867e-7 kg
- diesel, burned in agricultural machinery: 0.000288867 MJ
- diesel, burned in building machine: 0.000223458 MJ
- diesel, burned in diesel-electric generating set, 18.5kW: 6.00921e-6 MJ
- dust collector, electrostatic precipitator, for industrial use: 1.70373e-11 unit
- electricity, medium voltage: 8.88691e-5, 0.00018732, 6.40046e-10, 5.73514e-5, 7.59268e-9, 3.96263e-8, 8.8058e-9, 4.33058e-9, 6.89591e-9, 8.5555e-9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 kWh (32 suppliers, which the file names only by identifier); sum of these 0.000913596 kWh
- extrusion of plastic sheets and thermoforming, inline: 3.93724e-6 kg
- furnace, wood chips, softwood storage area, 1000kW: 8.45236e-11 unit
- furnace, wood chips, with silo, 300kW: 3.72281e-13 unit
- furnace, wood chips, with silo, 5000kW: 3.57349e-10 unit
- glued laminated timber, average glue mix: 1.73772e-8, 3.7729e-8 m3 (2 suppliers, which the file names only by identifier); sum of these 5.51061e-8 m3
- hazardous waste, for incineration: -6.43535e-7 kg
- heat, district or industrial, natural gas: 0.000126132, 4.8185e-7, 0.00152747, 7.91803e-9 MJ (4 suppliers, which the file names only by identifier); sum of these 0.00165409 MJ
- heat, district or industrial, other than natural gas: 6.99643e-6, 4.09326e-5, 1.04161e-6, 0.000191757, 0.000172728, 1.89633e-8, 9.80091e-5, 5.38131e-5 MJ (8 suppliers, which the file names only by identifier); sum of these 0.000565297 MJ
- heavy fuel oil: 1.37797e-6, 1.1595e-8, 5.89469e-8, 1.48747e-8, 1.9912e-8, 2.83893e-7 kg (6 suppliers, which the file names only by identifier); sum of these 1.7672e-6 kg
- lubricating oil: 7.08613e-6, 1.08389e-6 kg (2 suppliers, which the file names only by identifier); sum of these 8.17002e-6 kg
- medium density fibreboard: 3.60336e-9, 2.30776e-8 m3 (2 suppliers, which the file names only by identifier); sum of these 2.66809e-8 m3
- melamine formaldehyde resin: 7.57733e-5 kg
- melamine urea formaldehyde adhesive: 1.01298e-7 kg
- metal working, average for chromium steel product manufacturing: 9.5642e-8 kg
- metal working, average for steel product manufacturing: 2.86883e-5 kg
- methylene diphenyl diisocyanate: 2.47455e-5 kg
- municipal solid waste: -8.00319e-11, -2.88184e-11, -5.66017e-8, -2.0166e-11 kg (4 suppliers, which the file names only by identifier); sum of these -5.67307e-8 kg
- paraffin: 2.39589e-5 kg
- particleboard, uncoated: 7.24856e-8, 3.50181e-8 m3 (2 suppliers, which the file names only by identifier); sum of these 1.07504e-7 m3
- phenolic resin: 9.29876e-6 kg
- plywood: 1.37188e-9, 2.91077e-8 m3 (2 suppliers, which the file names only by identifier); sum of these 3.04796e-8 m3
- polyethylene terephthalate, granulate, amorphous: 8.43694e-7 kg
- polypropylene, granulate: 3.09355e-6 kg
- polyurethane adhesive: 9.08199e-8 kg
- pulpwood, hardwood, measured as solid wood under bark: 1.85405e-8 m3
- pulpwood, softwood, measured as solid wood under bark: 2.00369e-6 m3
- residual softwood, wet: 6.36971e-9 m3
- sawdust, wet, measured as dry mass: 3.73287e-6, 0.000183011 kg (2 suppliers, which the file names only by identifier); sum of these 0.000186744 kg
- sawlog and veneer log, eucalyptus ssp., measured as solid wood under bark: 1.67162e-7, 1.17306e-9 m3 (2 suppliers, which the file names only by identifier); sum of these 1.68335e-7 m3
- sawlog and veneer log, softwood, measured as solid wood under bark: 5.01155e-10, 1.0469e-7, 1.18579e-9 m3 (3 suppliers, which the file names only by identifier); sum of these 1.06377e-7 m3
- sawnwood, board, softwood, raw, dried (u=10%): 2.42882e-8 m3
- sawnwood, hardwood, dried (u=10%), planed: 1.53862e-9, 6.247e-10 m3 (2 suppliers, which the file names only by identifier); sum of these 2.16332e-9 m3
- scrap aluminium: -3.41967e-6, -1.60443e-7, -7.20042e-6 kg (3 suppliers, which the file names only by identifier); sum of these -1.07805e-5 kg
- scrap steel: -4.93963e-9, -1.21438e-5, -3.89879e-6 kg (3 suppliers, which the file names only by identifier); sum of these -1.60475e-5 kg
- shed, large, wood, non-insulated, fire-unprotected: 1.71051e-9 m2
- slab and siding, softwood, wet, measured as dry mass: 0.000197529, 1.15595e-6, 0.000765936, 1.48472e-8 kg (4 suppliers, which the file names only by identifier); sum of these 0.000964635 kg
- steel in car shredder residue: -4.01284e-6 kg
- steel, low-alloyed: 4.01284e-6 kg
- steel, low-alloyed, hot rolled: 3.95046e-5 kg
- synthetic rubber: 1.21814e-6 kg
- tap water: 2.54624e-6, 0.00107787, 0.000106111, 4.20808e-6, 7.85208e-6, 0.00121429, 2.76046e-6, 2.11529e-5 kg (8 suppliers, which the file names only by identifier); sum of these 0.00243678 kg
- tractor, 4-wheel, agricultural: 5.48469e-7 kg
- urea: 1.62276e-6, 2.05233e-7, 1.38572e-6 kg (3 suppliers, which the file names only by identifier); sum of these 3.21371e-6 kg
- urea formaldehyde resin: 0.00035459, 1.60928e-6 kg (2 suppliers, which the file names only by identifier); sum of these 0.0003562 kg
- used intermodal shipping container, 20-foot: -3.96757e-9 unit
- used intermodal shipping container, 40-foot: -1.90425e-9 unit
- used intermodal shipping container, 40-foot, high-cube: -2.61135e-9 unit
- used intermodal shipping container, 45-foot, high-cube: -3.91619e-10 unit
- waste mineral oil: -3.80825e-8, -4.03893e-6, -1.53831e-6 kg (3 suppliers, which the file names only by identifier); sum of these -5.61533e-6 kg
- waste paperboard: -1.78128e-8, -1.16178e-8, -2.16695e-6, -1.16649e-7, -2.86474e-7, -6.27615e-9, -6.43653e-8, -1.55757e-9 kg (8 suppliers, which the file names only by identifier); sum of these -2.6717e-6 kg
- waste polyethylene/polypropylene product: -2.79973e-6, -1.10437e-6, -3.31393e-8 kg (3 suppliers, which the file names only by identifier); sum of these -3.93724e-6 kg
- waste rubber, unspecified: -2.39849e-8, -5.71344e-7, -5.72895e-7 kg (3 suppliers, which the file names only by identifier); sum of these -1.16822e-6 kg
- waste wood, post-consumer: -9.56035e-5, -5.77816e-5 kg (2 suppliers, which the file names only by identifier); sum of these -0.000153385 kg
- waste wood, untreated: -7.36067e-9, -6.75371e-8, -1.00678e-7, -1.07573e-5, -4.27202e-8, -1.27964e-6, -2.82773e-7 kg (7 suppliers, which the file names only by identifier); sum of these -1.25381e-5 kg
- wastewater from particle board production: -1.51935e-10, -5.51601e-7 m3 (2 suppliers, which the file names only by identifier); sum of these -5.51752e-7 m3
- wastewater, unpolluted: -4.40924e-9, -9.11776e-7 m3 (2 suppliers, which the file names only by identifier); sum of these -9.16186e-7 m3
- welding, arc, steel: 5.24294e-7 m
- wood ash mixture, pure: -3.32984e-10, -1.61985e-8, -6.19312e-6 kg (3 suppliers, which the file names only by identifier); sum of these -6.20965e-6 kg
- wood chips, dry, measured as dry mass: 0.00154167 kg
- wood chips, from post-consumer wood, measured as dry mass: 0.00139942 kg
- wood chips, wet, measured as dry mass: 4.39275e-7, 0.000193875 kg (2 suppliers, which the file names only by identifier); sum of these 0.000194314 kg
- wood preservation, pressure vessel, creosote, outdoor use, ground contact: 8.93309e-6 kg
- wooden board factory, organic bonded boards: 3.04299e-13, 4.31814e-15 unit (2 suppliers, which the file names only by identifier); sum of these 3.08617e-13 unit
- zinc coat, pieces: 2.96639e-6 m2

## Inputs from nature
- Water, cooling, unspecified natural origin [natural resource, in water]: 4.88006e-7 m3
- Water, well, in ground [natural resource, in water]: 1.51393e-8 m3

## Emissions to nature
- Acetaldehyde [air, unspecified]: 8.50602e-12 kg
- Acetaldehyde [air, urban air close to ground]: 3.37753e-9 kg
- Acetone [air, unspecified]: 4.30066e-9 kg
- Ammonia [air, unspecified]: 2.41236e-10 kg
- Ammonia [air, urban air close to ground]: 2.80913e-8 kg
- Arsenic ion [air, unspecified]: 1.39443e-13 kg
- Arsenic ion [air, urban air close to ground]: 1.62378e-11 kg
- Benzene [air, unspecified]: 1.26893e-10 kg
- Benzene [air, urban air close to ground]: 1.47764e-8 kg
- Benzene, ethyl- [air, unspecified]: 4.18329e-12 kg
- Benzene, ethyl- [air, urban air close to ground]: 4.87133e-10 kg
- Benzene, hexachloro- [air, unspecified]: 1.00399e-18 kg
- Benzene, hexachloro- [air, urban air close to ground]: 1.16912e-16 kg
- Benzo(a)pyrene [air, unspecified]: 6.97215e-14 kg
- Benzo(a)pyrene [air, urban air close to ground]: 8.11888e-12 kg
- Bromine [air, unspecified]: 8.36658e-12 kg
- Bromine [air, urban air close to ground]: 9.74265e-10 kg
- Cadmium II [air, unspecified]: 9.76101e-14 kg
- Cadmium II [air, urban air close to ground]: 1.13664e-11 kg
- Calcium [air, unspecified]: 8.15741e-10 kg
- Calcium [air, urban air close to ground]: 9.49909e-8 kg
- Carbon dioxide, fossil [air, unspecified]: 6.20298e-6 kg
- Carbon dioxide, non-fossil [air, unspecified]: 3.31019e-5 kg
- Carbon dioxide, non-fossil [air, urban air close to ground]: 0.00173744 kg
- Carbon monoxide, fossil [air, unspecified]: 1.24568e-9 kg
- Carbon monoxide, non-fossil [air, unspecified]: 2.70391e-7 kg
- Carbon monoxide, non-fossil [air, urban air close to ground]: 3.24755e-6 kg
- Chlorine [air, unspecified]: 2.50997e-11 kg
- Chlorine [air, urban air close to ground]: 2.9228e-9 kg
- Chromium III [air, unspecified]: 5.52194e-13 kg
- Chromium III [air, urban air close to ground]: 6.43015e-11 kg
- Chromium VI [air, unspecified]: 5.57772e-15 kg
- Chromium VI [air, urban air close to ground]: 6.4951e-13 kg
- Copper ion [air, unspecified]: 3.06775e-12 kg
- Copper ion [air, urban air close to ground]: 3.57231e-10 kg
- Dinitrogen monoxide [air, unspecified]: 3.25016e-10 kg
- Dinitrogen monoxide [air, urban air close to ground]: 3.73468e-8 kg
- Dioxins, measured as 2,3,7,8-tetrachlorodibenzo-p-dioxin [air, unspecified]: 4.32273e-18 kg
- Dioxins, measured as 2,3,7,8-tetrachlorodibenzo-p-dioxin [air, urban air close to ground]: 5.03371e-16 kg
- Fluorine [air, unspecified]: 6.97215e-12 kg
- Fluorine [air, urban air close to ground]: 8.11888e-10 kg
- Formaldehyde [air, unspecified]: 2.35184e-8 kg
- Formaldehyde [air, urban air close to ground]: 7.09124e-7 kg
- Heat, waste [air, non-urban air or from high stacks]: 1.20808e-6 MJ
- Hydrocarbons, aliphatic, alkanes, unspecified [air, unspecified]: 3.38441e-10 kg
- Hydrocarbons, aliphatic, alkanes, unspecified [air, urban air close to ground]: 1.47764e-8 kg
- Hydrocarbons, aliphatic, unsaturated [air, unspecified]: 4.32273e-10 kg
- Hydrocarbons, aliphatic, unsaturated [air, urban air close to ground]: 5.03371e-8 kg
- Lead II [air, unspecified]: 3.48607e-12 kg
- Lead II [air, urban air close to ground]: 4.05944e-10 kg
- Magnesium [air, unspecified]: 5.01995e-11 kg
- Magnesium [air, urban air close to ground]: 5.84559e-9 kg
- Manganese II [air, unspecified]: 2.37053e-11 kg
- Manganese II [air, urban air close to ground]: 2.76042e-9 kg
- Mercury II [air, unspecified]: 4.18329e-14 kg
- Mercury II [air, urban air close to ground]: 4.87133e-12 kg
- Methane, fossil [air, urban air close to ground]: 2.17997e-10 kg
- Methane, non-fossil [air, unspecified]: 2.73629e-10 kg
- Methane, non-fossil [air, urban air close to ground]: 2.43566e-8 kg
- Methanol [air, non-urban air or from high stacks]: 1.36023e-7 kg
- NMVOC, non-methane volatile organic compounds [air, unspecified]: 4.70005e-8 kg
- NMVOC, non-methane volatile organic compounds [air, urban air close to ground]: 3.12282e-6 kg
- Nickel II [air, unspecified]: 8.36658e-13 kg
- Nickel II [air, urban air close to ground]: 9.74265e-11 kg
- Nitrogen oxides [air, unspecified]: 5.36263e-8 kg
- Nitrogen oxides [air, urban air close to ground]: 3.6535e-6 kg
- PAH, polycyclic aromatic hydrocarbons [air, unspecified]: 1.54782e-12 kg
- PAH, polycyclic aromatic hydrocarbons [air, urban air close to ground]: 1.80239e-10 kg
- Particulate Matter, < 2.5 um [air, unspecified]: 7.46265e-9 kg
- Particulate Matter, < 2.5 um [air, urban air close to ground]: 4.05944e-7 kg
- Particulate Matter, > 10 um [air, unspecified]: 6.10512e-7 kg
- Particulate Matter, > 2.5 um and < 10um [air, unspecified]: 1.22533e-8 kg
- Phenol, pentachloro- [air, unspecified]: 1.12949e-15 kg
- Phenol, pentachloro- [air, urban air close to ground]: 1.31526e-13 kg
- Phosphorus [air, unspecified]: 4.18329e-11 kg
- Phosphorus [air, urban air close to ground]: 4.87133e-9 kg
- Potassium I [air, unspecified]: 3.26297e-9 kg
- Potassium I [air, urban air close to ground]: 3.79964e-7 kg
- Sodium [air, unspecified]: 1.81276e-10 kg
- Sodium [air, urban air close to ground]: 2.11091e-8 kg
- Sulfur dioxide [air, unspecified]: 3.48607e-10 kg
- Sulfur dioxide [air, urban air close to ground]: 2.09574e-7 kg
- Sulfur trioxide [air, unspecified]: 2.20577e-9 kg
- Toluene [air, unspecified]: 4.18329e-11 kg
- Toluene [air, urban air close to ground]: 4.87133e-9 kg
- Water [air, unspecified]: 2.17272e-7 m3
- Zinc II [air, unspecified]: 4.18329e-11 kg
- Zinc II [air, urban air close to ground]: 4.87133e-9 kg
- m-Xylene [air, unspecified]: 1.67332e-11 kg
- m-Xylene [air, urban air close to ground]: 1.94853e-9 kg
- Oils, unspecified [soil, industrial]: 2.05098e-9 kg
- Oils, unspecified [soil, unspecified]: 6.22693e-7 kg
- Formaldehyde [water, unspecified]: 9.41644e-12 kg
- Suspended solids, unspecified [water, unspecified]: 3.14741e-9 kg
- Water [water, unspecified]: 6.36835e-9 m3
