# treatment of heat carrier liquid, 40% C3H8O2, wastewater treatment

Dataset: EcoSpold 2, unit process
Geography: RoW
Time period: 2010-01-01 to 2022-12-31
Technology level: current
Classification: ISIC rev.4 ecoinvent: 3700:Sewerage
Scenario: Business-as-Usual
System model: Allocation at the point of substitution
Generated by: Nikolia Stoikou
Database: ecoinvent
isCopyrightProtected: true

## General comment
This dataset represents the treatment of a wastewater, generated from an ordinary transforming activity. Purification in wastewater treatment of 'heat carrier liquid, 40% C3H8O2'. Recommended use of this dataset: to be used for wastewaters, generated from ordinary transforming activities, of equal or similar composition. The wastewater has a content of TOC: 208.34 kg/m3, COD: 812.24172 kg/m3 and BOD: 392.84233 kg/m3. TOC is equal to C present in the wastewater, COD is calculated as TOC/0.2565 and BOD is calculated as COD/0.53034. Detailed elemental composition can be found in the properties of the wastewater treated. Share of biogenic carbon in the sludge: 0%.

## Included activities start
The activity starts with the wastewater being available at the gate of the treatment facility. Collection and transportation of the wastewater to the treatment plant is not included.

## Included activities end
The activity ends with the wastewater being treated and waste-specific emissions released to the environment. Expenditures from treatment of wastewater in waste treatment plant are included as well as relevant infrastructure of the plant. Emissions from any sludge digestion, biogas generation and utilization (heeding specific wastewater composition) are also included. Waste-specific direct emissions of untreated wastewater and required territory-specific infrastructure for sewers are not contained within this dataset but instead in the regional market datasets for this wastewater.

## Geography
The site has mean annual temperature (MAT) of 16.743579766537 degC, mean annual precipitation (MAP) of 1250.84108527132 mm/year, mean annual actual evaporation (EAT) of 460.58904958214 mm/year. In the WWT plant, 0% of its water input are lost due to evaporation from pools, 10.3% of water is *gained* from organic mass degradation, and 4.7% is removed off site via sludge disposal. (References: UN data, 2020. Precipitation, Environment Statistics Database, United Nations Statistics Division Available at: http://data.un.org/Data.aspx?q=precipitation&d=ENV&f=variableID%3a6; World Bank, 2022. Surface area (sq.km), World Bank Group Available at: https://data.worldbank.org/indicator/AG.SRF.TOTL.K2; Doka G.,2021. A model for composition-specific life cycle inventories of regionalised wastewater fates, Zurich, Switzerland. http://www.doka.ch/publications.htm)

## Technology
This is an inventory for the disposal of a selected wastewater in Global. The reference unit is 1 m3 wastewater input. This activity represents the treatment of a specific wastewater in a WWT plant (while direct emissions and sewering are heeded in the upstream market dataset for this wastewater). The size of the treatment plant infrastructure is for a supranational region average territory situation. The assumed size of the WWTP treats 82.2 Mio m3 per year. The mixture of WWTP with one, two, or three stages is 8.2%-41.2%-50.6%. The actual, waste-specific oxygen requirement in the biological stages is 79.836825 kg O. The digestion process produces 18210.309 litres of biogas with an energy content of 421.7635MJ. 60.5% of the biogas is utilized for energy. The remainder is flared. The gross electric efficiency is 26.564%. The gross thermal efficiency is 47.853%. After digestion, the remaining total sludge mass (dry matter) is 133.4kg DM.

## Reference product
- iron scrap, sorted, pressed: 1 kg; By-product classification Recyclable; CPC 39310: Slag, dross, scalings and other waste from the manufacture of iron or steel; lognormal variance with pedigree 0.3611, pedigree (1,1,1,1,1)
  scrap output from used infrastructure for wastewater treatment plant.
  Uncertainty: Uncertainty calculated from wastewater technosphere fate uncertainty and treatment infrastructure uncertainty.
  production volume 0.00104616 kg
    Calculated in proportion to wastewater reference product.
  property price 0.175 EUR2005
    Temporary price data. Calculated as 90% of purchasers price based on: 2005 import and export prices (total trades (USD) divided by total weight (kg) in biggest economies of the world: EU27, USA, Brasil, China, India, Japan and Russia) from UN Commodity Trade Statistics Database (http://data.un.org/Explorer.aspxDatabase [Accessed 2011.06.20]). Commodity: Waste or scrap, of cast iron
  properties: carbon allocation 0 kg, carbon content 0, carbon content, fossil 0, carbon content, non-fossil 0, dry mass 1 kg, water content 0, water in wet mass 0 kg, wet mass 1 kg

## Inputs from technosphere
- activated bentonite: 0.000298096 kg
- aluminium, wrought alloy: 0.000127048 kg
- ammonia, anhydrous, liquid: 1.17601e-6, 1.23259e-7, 1.20034e-6, 4.52998e-6, 6.05816e-7, 5.51012e-7, 1.30353e-5, 3.89406e-7 kg (8 suppliers, which the file names only by identifier); sum of these 2.16112e-5 kg
- anti-reflex-coating, etching, solar glass: 1.78406e-6 m2
- brazing solder, cadmium free: 1.54309e-7 kg
- building, hall, steel construction: 5.31274e-8 m2
- building, multi-storey: 3.18164e-7 m3
- cement, unspecified: 0.00101448, 3.80626e-6, 2.48966e-6, 0.000100737, 2.65255e-5, 3.16203e-6, 1.25266e-6, 1.61647e-5, 6.10313e-5 kg (9 suppliers, which the file names only by identifier); sum of these 0.00122965 kg
- chemical, organic: 1.73328e-8 kg
- copper, cathode: 0.000244885 kg
- corrugated board box: 1.79508e-6, 4.16656e-6, 6.68667e-8 kg (3 suppliers, which the file names only by identifier); sum of these 6.0285e-6 kg
- diesel, burned in building machine: 0.659538 MJ
- drawing of pipe, steel: 9.58106e-5 kg
- electricity, low voltage: 6.79685e-6, 1.34698e-5, 0.000129391, 2.30815e-6, 4.62442e-5, 4.19747e-7, 3.20545e-5, 9.43927e-6 kWh (8 suppliers, which the file names only by identifier); sum of these 0.000240124 kWh
- electricity, medium voltage: 1.42602e-7, 1.36316e-8, 2.47373e-6, 1.25942e-5, 6.43346e-9, 3.9298e-6, 1.17029e-7, 5.97132e-7, 5.18652e-6, 7.69198e-9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 kWh (23 suppliers, which the file names only by identifier); sum of these 6.62868e-5 kWh
- electronics scrap from control units: -1.80093e-5 kg
- electronics, for control units: 1.80093e-5 kg
- ethylene glycol: 0.00384575 kg
- evacuated tube collector: 1.38056e-5 m2
- expansion vessel, 25l: 1.99871e-6 unit
- expansion vessel, 80l: 7.00668e-7 unit
- flat plate solar collector, Cu absorber: 4.7153e-5 m2
- glass tube, borosilicate: 2.17811e-5 kg
- hazardous waste, for incineration: -3.43868e-7, -4.32254e-9 kg (2 suppliers, which the file names only by identifier); sum of these -3.4819e-7 kg
- heat carrier liquid, 40% C3H8O2: -1.1442e-11, -1.17844e-5 m3 (2 suppliers, which the file names only by identifier); sum of these -1.17844e-5 m3
- heat storage, 2000l: 2.16116e-6 unit
- heat, central or small-scale, other than natural gas: 0.00166994, 2.29367e-5 MJ (2 suppliers, which the file names only by identifier); sum of these 0.00169287 MJ
- heat, district or industrial, natural gas: 7.21932e-5, 0.000217887, 3.58045e-6, 6.92323e-9 MJ (4 suppliers, which the file names only by identifier); sum of these 0.000293668 MJ
- hot water tank, 600l: 2.43283e-7 unit
- hydrochloric acid, without water, in 30% solution state: 1.73328e-7 kg
- inert waste, for final disposal: -0.0931551 kg
- injection moulding: 1.20062e-5 kg
- municipal solid waste: -6.37369e-11, -1.62754e-11, -5.08829e-11, -7.67986e-12, -5.72814e-11, -3.56286e-11, -7.47934e-11, -4.27783e-12, -6.49673e-12, -3.30196e-11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 kg (39 suppliers, which the file names only by identifier); sum of these -4.35622e-8 kg
- polyethylene, high density, granulate: 1.20062e-5 kg
- polyethylene, low density, granulate: 0.00670717 kg
- propylene glycol, liquid: 0.000207385 kg
- pump, 40W: 9.58187e-6 unit
- reinforcing steel: 0.00219615 kg
- selective coat, copper sheet, black chrome: 2.50185e-7 m2
- selective coat, copper sheet, physical vapour deposition: 1.53388e-6 m2
- sheet rolling, aluminium: 0.000126065 kg
- sheet rolling, chromium steel: 0.000144074 kg
- sheet rolling, copper: 5.00038e-6 kg
- sheet rolling, steel: 0.000966499 kg
- silicone product: 9.64666e-8 kg
- soft solder, Sn97Cu3: 1.47109e-8 kg
- solar collector factory: 3.56813e-13 unit
- solar glass, low-iron: 2.28169e-6 kg
- steel, chromium steel 18/8, hot rolled: 0.000151246 kg
- stone wool, packed: 2.47326e-5 kg
- synthetic rubber: 1.20623e-6 kg
- tap water: 1.56481e-7, 6.52115e-6, 2.58611e-7, 1.14332e-7, 4.82556e-7, 7.46249e-5, 1.69646e-7, 9.40012e-7, 1.29997e-6 kg (9 suppliers, which the file names only by identifier); sum of these 8.45676e-5 kg
- transport, passenger car: 0.00060031 km
- tube insulation, elastomere: 4.97145e-5 kg
- waste glass: -5.65105e-11, -3.25469e-9, -1.01691e-9, -1.97701e-10, -3.71055e-9, -7.7961e-9, -2.96364e-9, -8.45859e-8, -2.10473e-8, -3.83604e-9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 kg (42 suppliers, which the file names only by identifier); sum of these -1.04304e-6 kg
- waste glass sheet: -4.70125e-7, -1.42968e-7, -2.34497e-5 kg (3 suppliers, which the file names only by identifier); sum of these -2.40628e-5 kg
- waste mineral wool: -1.8431e-5, -1.45022e-8, -6.28711e-6 kg (3 suppliers, which the file names only by identifier); sum of these -2.47326e-5 kg
- waste paperboard, unsorted: -2.55391e-6, -4.60341e-7, -3.01425e-6 kg (3 suppliers, which the file names only by identifier); sum of these -6.0285e-6 kg
- waste plastic, mixture: -1.45519e-7, -1.5822e-9, -7.35338e-10, -2.12052e-10, -7.74801e-10, -1.41703e-9, -8.61379e-10, -9.85199e-10, -5.82829e-10, -1.66784e-8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 kg (43 suppliers, which the file names only by identifier); sum of these -1.30204e-6 kg
- waste polyethylene/polypropylene product: -2.79823e-5, -1.10378e-5 kg (2 suppliers, which the file names only by identifier); sum of these -3.90201e-5 kg
- wastewater, average: -4.03563e-10, -5.38844e-9, -1.51345e-6, -3.45838e-7 m3 (4 suppliers, which the file names only by identifier); sum of these -1.86508e-6 m3
- water, completely softened: 0.000203264, 0.000271542 kg (2 suppliers, which the file names only by identifier); sum of these 0.000474806 kg
- wire drawing, copper: 0.000144074 kg
- zinc coat, coils: 2.04105e-5 m2

## Inputs from nature
- Occupation, industrial area [natural resource, land]: 9.54493e-6 m2*year
- Transformation, from unspecified [natural resource, land]: 1.90598e-7 m2
- Transformation, to industrial area [natural resource, land]: 1.90598e-7 m2
- Water, unspecified natural origin [natural resource, in water]: 0.000381868 m3

## Emissions to nature
- Water [air, unspecified]: 5.73641e-5 m3
- Water [water, unspecified]: 0.000323307 m3
