# wooden board factory construction, organic bonded boards

Dataset: EcoSpold 2, unit process
Geography: RoW
Time period: 2002-01-01 to 2022-12-31
Technology level: current
Classification: EcoSpold01Categories: wooden materials/extraction
Classification: ISIC rev.4 ecoinvent: 4290:Construction of other civil engineering projects
Synonyms: Sperrholzwerk; MDF-Werk; OSB-Werk; Spanplattenwerk; Faserplattenwerk
Tags: ConvertedDataset
Scenario: Business-as-Usual
System model: Allocation at the point of substitution
Generated by: Hans-Jörg Althaus
Published in: Werner F. 2007
Database: ecoinvent
isCopyrightProtected: true

## General comment
The service life is assumed to be 50 years. Thus the life time output is 30'000'000 m3 board. This data must only be used to consider the infrastructure needed for wood board production if this is not relevant.
[This dataset was already contained in the ecoinvent database version 2. It was not individually updated during the transfer to ecoinvent version 3. Life Cycle Impact Assessment results may still have changed, as they are affected by changes in the supply chain, i.e. in other datasets. This dataset was generated following the ecoinvent quality guidelines for version 2. It may have been subject to central changes described in the ecoinvent version 3 change report (http://www.ecoinvent.org/database/ecoinvent-version-3/reports-of-changes/), and the results of the central updates were reviewed extensively. The changes added e.g. consistent water flows and other information throughout the database. The documentation of this dataset can be found in the ecoinvent reports of version 2, which are still available via the ecoinvent website. The change report linked above covers all central changes that were made during the conversion process.]

## Included activities end
The land area and the material and their transports needed for building and disposal of a plant for organic bonded wooden boards with a yearly output of 600'000 m3 is included.

## Geography
Estimate is so rough that the Geograhpy is not relevant.

## Technology
Relates to a medium to large production plant for wooden boards using one or several Conti-presses.

## Reference product
- wooden board factory, organic bonded boards: 1 unit; By-product classification allocatable product; CPC 53269: Other constructions for manufacturing
  production volume 2.67763 unit
    This is a placeholder value that does not reflect real-world production volumes. This dataset does not currently require a real-world production volume to work in the database framework, and no actual data were collected yet. This has no negative effect on the results of the ecoinvent database.
  property price 1.28695e9 EUR2005
    Convert from EU 27 price to the world by currency exchange rate.
  properties: carbon allocation 0 kg, carbon content 0

## Inputs from technosphere
- building, hall: 120000 m2; lognormal variance with pedigree 0.39, pedigree (3,5,5,5,3)
- concrete, normal strength: 74.9342, 10.7032, 157.921, 16.4552, 133.216, 5649.44, 317.325 m3 (7 suppliers, which the file names only by identifier); sum of these 6360 m3; lognormal variance with pedigree 0.39, pedigree (3,5,5,5,3)
  properties: dry mass 2190 kg, water content 0.086758, wet mass 2380 kg
- conveyor belt: 2000 m; lognormal variance with pedigree 0.39, pedigree (3,5,5,5,3)
- steel, low-alloyed, hot rolled: 1.4e7 kg; lognormal variance with pedigree 0.39, pedigree (3,5,5,5,3)
  properties: carbon content, fossil 0.005, dry mass 1 kg, wet mass 1 kg
  note on carbon content, fossil: Low alloyed steel composition given in Tab. 3.2 ecoinvent v2.2 report 10_partII. Steel assumed to have a C content of 0.5%
- waste reinforced concrete: -1.4e7 kg; lognormal variance with pedigree 0.35, pedigree (3,5,1,5,3)
  production volume
    Calculated from the production volume of wooden board factory, organic bonded boards in proportion to the respective output amounts.
  properties: dry mass 0.99418 kg, water content 0.00585407, wet mass 1 kg

## Inputs from nature
- Occupation, industrial area [natural resource, land]: 2.6e7 m2*year; lognormal variance with pedigree 0.12, pedigree (3,5,5,5,3)
- Transformation, from unspecified [natural resource, land]: 520000 m2; lognormal variance with pedigree 0.21, pedigree (3,5,5,5,3)
- Transformation, to industrial area [natural resource, land]: 520000 m2; lognormal variance with pedigree 0.21, pedigree (3,5,5,5,3)

## Sampling procedure
estimation

## Extrapolations
none This dataset has been copied from an original dataset covering the geography RER. The uncertainty has been adjusted accordingly.

## Review by Roberto Dones 2003-07-04
Passed
