# treatment of waste graphical paper, open burning

Dataset: EcoSpold 2, unit process
Geography: GLO
Time period: 2006-01-01 to 2022-12-31
Technology level: current
Classification: ISIC rev.4 ecoinvent: 3821:Treatment and disposal of non-hazardous waste
Synonyms: open, uncontrolled burning
Scenario: Business-as-Usual
System model: Allocation at the point of substitution
Share of production covered: 1 %
Generated by: Avraam Symeonidis
Database: ecoinvent
isCopyrightProtected: true

## General comment
This dataset represents the activity of waste disposal of waste graphical paper in uncontrolled, open burning. Recommended use of this dataset: For paper, which goes to disposal as part of unmanaged communal waste mixture. Larger amounts of *already separated* paper could go to recycling, depending on country-specific situation.Waste composition (wet, in ppm): upper heating value 16.61 MJ/kg; lower heating value 14.12 MJ/kg; H2O 110830; O 378670; H 53852; C 404000; S 1406.7; N 3756.6; P 112.95; B 17.19; Cl 1837.5; Br n.a.; F 19.468; I n.a.; Ag 0.047733; As 2.0485; Ba 114.24; Cd 1.6629; Co 0.7359; Cr 14.461; Cu 60.893; Hg 0.13902; Mn 40.221; Mo 4.2976; Ni 9.4431; Pb 80.374; Sb 0.70911; Se 2.5786; Sn n.a.; V n.a.; Zn 124.8; Be 0.97413; Sc n.a.; Sr 58.276; Ti 171.9; Tl 1.719; W n.a.; Si 21255; Fe 1188.4; Ca 3438.1; Al 12391; K 1327.5; Mg 4297.6; Na 918.83; . Share of carbon in waste that is biogenic 100%. // Recycling rates for metallic iron = 0% for metallic aluminium = 0% for metallic copper = 0% . A mass of 0.0965kg residues are left on ground.

## Included activities start
open burning starting from waste placement on burning site (without transports to the site)

## Included activities end
Waste-specific emissions to air and soil from open burning.

## Geography
Generic open burning without any geographical distinction.

## Technology
This is an inventory for open burning of solid waste. Informal or uncontrolled burning. No flue gas treatment. Suitable for informal recycling (e.g. burning of e-waste). Based on Municipal waste incineration without any pollution control. Residues (minus any actually recycled metals) are left on site. Assumption of share of thermal NOx to total NOx in average waste burning process is 30%. Contribution from thermal NOx is 810mg per kg waste. Recycling rates for metallic iron = 0% for metallic aluminium = 0% for metallic copper = 0% .

## Time period
generic open burning without any temporal distinction

## Reference product
- waste graphical paper: -1 kg; By-product classification Waste; CPC 39990: Other wastes n.e.c.
  main reference product of this activity (supply of disposal service).
  production volume 1 kg
    The amount of the annual production volume is a placeholder value. The contribution of this technology to the different local markets can be found in the markets themselves.
  property heating value, net 14.12 MJ
    Value taken from the general comment of the treatment dataset.
  property price 0 EUR2005
    Waste products are assigned a price of zero as they are assumed to require further treatment.
  properties: aluminium content 0.013935, antimony content 7.9749e-7, arsenic content 2.3039e-6, barium content 0.00012848, beryllium content 1.0955e-6, boron content 1.9333e-5, cadmium content 1.8702e-6, calcium content 0.0038666, carbon allocation 0.403994 kg, carbon content 0.45435, carbon content, non-fossil 0.45435, chlorine content 0.0020665, chromium content 1.6263e-5, cobalt content 8.2762e-7, copper content 6.8483e-5, dry mass 0.88917 kg, fluorine content 2.1895e-5, heating value, gross 16.611 MJ, hydrogen content 0.060564, iron content 0.0013366, lead content 9.0392e-5, magnesium content 0.0048333, manganese content 4.5234e-5, mercury content 1.5635e-7, molybdenum content 4.8333e-6, nickel content 1.062e-5, nitrogen content 0.0042248, oxygen content 0.42587, phosphorus content 0.00012703, potassium content 0.0014929, selenium content 2.9e-6, silicon content 0.023904, silver content 5.3682e-8, sodium content 0.0010334, strontium content 6.5539e-5, sulfur content 0.001582, thallium content 1.9333e-6, titanium content 0.00019333, water content 0.12464, water in wet mass 0.11083 kg, wet mass 1 kg, zinc content 0.00014036

## Inputs from nature
- Oxygen [natural resource, in air]: 1.0854 kg; lognormal variance with pedigree 0.052499, pedigree (1,1,4,1,1)
  oxygen from ambient air needed to combust and oxidise this waste. Net demand, i.e. without air O2 leaving the process uncombusted.
  Uncertainty: uncertainty is calculated from uncertainties in waste composition and transfer coefficients to flue gas and soild residues

## Emissions to nature
- Acetaldehyde [air, urban air close to ground]: 0.0004284 kg; lognormal variance with pedigree 0.0491, pedigree (1,1,4,1,1)
  Process-specific (constant) emissions to air from open burning.
  Uncertainty: uncertainty generic estimate
- Aluminium III [air, urban air close to ground]: 1.0213e-5 kg; lognormal variance with pedigree 0.45729, pedigree (1,1,4,1,1)
  Emissions to air from open burning.
  Uncertainty: Uncertainty calculated depending on waste input and uncertainty of transfer coefficents in incineration model.
- Antimony ion [air, urban air close to ground]: 1.7041e-12 kg; lognormal variance with pedigree 1.9075, pedigree (1,1,4,1,1)
  (same comment as for Aluminium III)
- Arsenic ion [air, urban air close to ground]: 1.7459e-8 kg; lognormal variance with pedigree 1.5377, pedigree (1,1,4,1,1)
  (same comment as for Aluminium III)
- Barium II [air, urban air close to ground]: 4.7086e-6 kg; lognormal variance with pedigree 0.97807, pedigree (1,1,4,1,1)
  (same comment as for Aluminium III)
- Benzene [air, urban air close to ground]: 0.00097975 kg; lognormal variance with pedigree 0.0491, pedigree (1,1,4,1,1)
  (same comment as for Acetaldehyde)
- Benzene, ethyl- [air, urban air close to ground]: 0.00032746 kg; lognormal variance with pedigree 0.0491, pedigree (1,1,4,1,1)
  (same comment as for Acetaldehyde)
- Beryllium II [air, urban air close to ground]: 1.8411e-9 kg; lognormal variance with pedigree 1.6675, pedigree (1,1,4,1,1)
  (same comment as for Aluminium III)
- Boron [air, urban air close to ground]: 6.8755e-9 kg; lognormal variance with pedigree 1.3307, pedigree (1,1,4,1,1)
  (same comment as for Aluminium III)
- Cadmium II [air, urban air close to ground]: 9.4086e-9 kg; lognormal variance with pedigree 1.5733, pedigree (1,1,4,1,1)
  (same comment as for Aluminium III)
- Calcium [air, urban air close to ground]: 8.1172e-5 kg; lognormal variance with pedigree 0.54153, pedigree (1,1,4,1,1)
  (same comment as for Aluminium III)
- Carbon dioxide, non-fossil [air, urban air close to ground]: 1.397 kg; lognormal variance with pedigree 0.03329, pedigree (1,1,4,1,1)
  Emissions to air from open burning.
  Uncertainty: Uncertainty calculated depending on waste input, uncertainty of transfer coefficents in incineration model,and uncertainty in CO and CH4 emissions.
- Carbon monoxide, non-fossil [air, urban air close to ground]: 0.0386 kg; lognormal variance with pedigree 0.65557, pedigree (1,1,4,1,1)
  (same comment as for Acetaldehyde)
- Chromium III [air, urban air close to ground]: 2.1564e-8 kg; lognormal variance with pedigree 1.3195, pedigree (1,1,4,1,1)
  (same comment as for Aluminium III)
- Cobalt II [air, urban air close to ground]: 2.9681e-8 kg; lognormal variance with pedigree 1.6432, pedigree (1,1,4,1,1)
  (same comment as for Aluminium III)
- Copper ion [air, urban air close to ground]: 6.6927e-8 kg; lognormal variance with pedigree 1.1361, pedigree (1,1,4,1,1)
  (same comment as for Aluminium III)
- Dinitrogen monoxide [air, urban air close to ground]: 0.00011625 kg; lognormal variance with pedigree 0.0491, pedigree (1,1,4,1,1)
  (same comment as for Aluminium III)
- Dioxins, measured as 2,3,7,8-tetrachlorodibenzo-p-dioxin [air, urban air close to ground]: 2.88e-11 kg; lognormal variance with pedigree 1.0672, pedigree (1,1,4,1,1)
  Process-specific (constant) emissions to air from open burning.
  Uncertainty: Uncertainty calculated from uncetainty in Chlorine content in waste and estimation formula
- Formaldehyde [air, urban air close to ground]: 0.00044365 kg; lognormal variance with pedigree 0.0491, pedigree (1,1,4,1,1)
  (same comment as for Acetaldehyde)
- Hydrochloric acid [air, urban air close to ground]: 0.0012604 kg; lognormal variance with pedigree 0.58724, pedigree (1,1,4,1,1)
  (same comment as for Aluminium III)
- Hydrogen fluoride [air, urban air close to ground]: 2.1847e-6 kg; lognormal variance with pedigree 1.201, pedigree (1,1,4,1,1)
  (same comment as for Aluminium III)
- Iron ion [air, urban air close to ground]: 2.1533e-6 kg; lognormal variance with pedigree 0.73085, pedigree (1,1,4,1,1)
  (same comment as for Aluminium III)
- Lead II [air, urban air close to ground]: 6.7541e-7 kg; lognormal variance with pedigree 1.0529, pedigree (1,1,4,1,1)
  (same comment as for Aluminium III)
- Magnesium [air, urban air close to ground]: 1.2875e-5 kg; lognormal variance with pedigree 0.5548, pedigree (1,1,4,1,1)
  (same comment as for Aluminium III)
- Manganese II [air, urban air close to ground]: 3.4236e-7 kg; lognormal variance with pedigree 1.1448, pedigree (1,1,4,1,1)
  (same comment as for Aluminium III)
- Mercury II [air, urban air close to ground]: 8.4255e-8 kg; lognormal variance with pedigree 1.831, pedigree (1,1,4,1,1)
  (same comment as for Aluminium III)
- Methane, non-fossil [air, urban air close to ground]: 0.0059 kg; lognormal variance with pedigree 0.0491, pedigree (1,1,4,1,1)
  (same comment as for Acetaldehyde)
- Molybdenum VI [air, urban air close to ground]: 2.1453e-8 kg; lognormal variance with pedigree 1.4518, pedigree (1,1,4,1,1)
  (same comment as for Aluminium III)
- Nickel II [air, urban air close to ground]: 1.3472e-8 kg; lognormal variance with pedigree 1.377, pedigree (1,1,4,1,1)
  (same comment as for Aluminium III)
- Nitrogen oxides [air, urban air close to ground]: 0.005378 kg; lognormal variance with pedigree 0.39307, pedigree (1,1,4,1,1)
  (same comment as for Aluminium III)
- PAH, polycyclic aromatic hydrocarbons [air, urban air close to ground]: 0.0003443 kg; lognormal variance with pedigree 0.30974, pedigree (1,1,4,1,1)
  (same comment as for Acetaldehyde)
- Particulate Matter, < 2.5 um [air, urban air close to ground]: 0.001044 kg; lognormal variance with pedigree 0.48837, pedigree (1,1,4,1,1)
  (same comment as for Aluminium III)
- Particulate Matter, > 10 um [air, urban air close to ground]: 0.00040153 kg; lognormal variance with pedigree 0.48837, pedigree (1,1,4,1,1)
  (same comment as for Aluminium III)
- Particulate Matter, > 2.5 um and < 10um [air, urban air close to ground]: 0.00056214 kg; lognormal variance with pedigree 0.48837, pedigree (1,1,4,1,1)
  (same comment as for Aluminium III)
- Phenol [air, urban air close to ground]: 1.4799e-5 kg; lognormal variance with pedigree 0.0491, pedigree (1,1,4,1,1)
  (same comment as for Acetaldehyde)
- Phosphorus [air, urban air close to ground]: 7.7608e-7 kg; lognormal variance with pedigree 1.0117, pedigree (1,1,4,1,1)
  (same comment as for Aluminium III)
- Polychlorinated biphenyls [air, urban air close to ground]: 1.1189e-7 kg; lognormal variance with pedigree 0.0491, pedigree (1,1,4,1,1)
  (same comment as for Acetaldehyde)
- Potassium I [air, urban air close to ground]: 1.9675e-5 kg; lognormal variance with pedigree 0.6716, pedigree (1,1,4,1,1)
  (same comment as for Aluminium III)
- Selenium IV [air, urban air close to ground]: 2.2348e-7 kg; lognormal variance with pedigree 1.4698, pedigree (1,1,4,1,1)
  (same comment as for Aluminium III)
- Silicon [air, urban air close to ground]: 9.9313e-8 kg; lognormal variance with pedigree 0.55071, pedigree (1,1,4,1,1)
  (same comment as for Aluminium III)
- Silver I [air, urban air close to ground]: 2.4497e-10 kg; lognormal variance with pedigree 1.9938, pedigree (1,1,4,1,1)
  (same comment as for Aluminium III)
- Sodium [air, urban air close to ground]: 2.2631e-5 kg; lognormal variance with pedigree 0.71058, pedigree (1,1,4,1,1)
  (same comment as for Aluminium III)
- Strontium [air, urban air close to ground]: 5.8276e-8 kg; lognormal variance with pedigree 1.1443, pedigree (1,1,4,1,1)
  (same comment as for Aluminium III)
- Styrene [air, urban air close to ground]: 0.0005275 kg; lognormal variance with pedigree 0.0491, pedigree (1,1,4,1,1)
  (same comment as for Acetaldehyde)
- Sulfur dioxide [air, urban air close to ground]: 0.00060586 kg; lognormal variance with pedigree 0.63139, pedigree (1,1,4,1,1)
  (same comment as for Aluminium III)
- Thallium I [air, urban air close to ground]: 3.4381e-9 kg; lognormal variance with pedigree 1.5924, pedigree (1,1,4,1,1)
  (same comment as for Aluminium III)
- Titanium ion [air, urban air close to ground]: 1.8228e-6 kg; lognormal variance with pedigree 0.94712, pedigree (1,1,4,1,1)
  (same comment as for Aluminium III)
- Toluene [air, urban air close to ground]: 0.000372 kg; lognormal variance with pedigree 0.0491, pedigree (1,1,4,1,1)
  (same comment as for Acetaldehyde)
- Water [air, urban air close to ground]: 0.00054164 m3; lognormal variance with pedigree 0.13136, pedigree (1,1,4,1,1)
  water vapour from waste humidity, hydrogen oxidation.
  Uncertainty: Uncertainty calculated from uncertainty in waste composition and the uncertainty of fraction to air.
- Zinc II [air, urban air close to ground]: 9.2851e-7 kg; lognormal variance with pedigree 0.99676, pedigree (1,1,4,1,1)
  (same comment as for Aluminium III)
- Aluminium III [soil, industrial]: 0.01238 kg; lognormal variance with pedigree 0.34993, pedigree (1,1,4,1,1)
  Emissions from open burning to residues left on ground.
  Uncertainty: Uncertainty calculated depending on waste input and uncertainty of transfer coefficents in incineration model.
- Antimony ion [soil, industrial]: 7.0911e-7 kg; lognormal variance with pedigree 1.6219, pedigree (1,1,4,1,1)
  (same comment as for Aluminium III)
- Arsenic ion [soil, industrial]: 2.0311e-6 kg; lognormal variance with pedigree 1.4842, pedigree (1,1,4,1,1)
  (same comment as for Aluminium III)
- Barium II [soil, industrial]: 0.00010953 kg; lognormal variance with pedigree 0.95231, pedigree (1,1,4,1,1)
  (same comment as for Aluminium III)
- Beryllium II [soil, industrial]: 9.7229e-7 kg; lognormal variance with pedigree 1.5808, pedigree (1,1,4,1,1)
  (same comment as for Aluminium III)
- Boron [soil, industrial]: 1.7184e-5 kg; lognormal variance with pedigree 1.2042, pedigree (1,1,4,1,1)
  (same comment as for Aluminium III)
- Cadmium II [soil, industrial]: 1.6535e-6 kg; lognormal variance with pedigree 1.5114, pedigree (1,1,4,1,1)
  (same comment as for Aluminium III)
- Calcium [soil, industrial]: 0.0033569 kg; lognormal variance with pedigree 0.5069, pedigree (1,1,4,1,1)
  (same comment as for Aluminium III)
- Carbon [soil, industrial]: 0.0020261 kg; lognormal variance with pedigree 0.095562, pedigree (1,1,4,1,1)
  (same comment as for Aluminium III)
- Chloride [soil, industrial]: 0.00061167 kg; lognormal variance with pedigree 0.59016, pedigree (1,1,4,1,1)
  (same comment as for Aluminium III)
- Chromium III [soil, industrial]: 1.444e-5 kg; lognormal variance with pedigree 1.2271, pedigree (1,1,4,1,1)
  (same comment as for Aluminium III)
- Cobalt II [soil, industrial]: 7.0622e-7 kg; lognormal variance with pedigree 1.6171, pedigree (1,1,4,1,1)
  (same comment as for Aluminium III)
- Copper ion [soil, industrial]: 6.0826e-5 kg; lognormal variance with pedigree 1.0361, pedigree (1,1,4,1,1)
  (same comment as for Aluminium III)
- Dioxins, measured as 2,3,7,8-tetrachlorodibenzo-p-dioxin [soil, industrial]: 7.9999e-12 kg; lognormal variance with pedigree 1.5477, pedigree (1,1,4,1,1)
  (same comment as for Dioxins, measured as 2,3,7,8-tetrachlorodibenzo-p-dioxin)
- Fluoride [soil, industrial]: 1.7393e-5 kg; lognormal variance with pedigree 1.1877, pedigree (1,1,4,1,1)
  (same comment as for Aluminium III)
- Iron ion [soil, industrial]: 0.0011863 kg; lognormal variance with pedigree 0.64313, pedigree (1,1,4,1,1)
  (same comment as for Aluminium III)
- Lead II [soil, industrial]: 7.9698e-5 kg; lognormal variance with pedigree 0.99911, pedigree (1,1,4,1,1)
  (same comment as for Aluminium III)
- Magnesium [soil, industrial]: 0.0042847 kg; lognormal variance with pedigree 0.47887, pedigree (1,1,4,1,1)
  (same comment as for Aluminium III)
- Manganese II [soil, industrial]: 3.9879e-5 kg; lognormal variance with pedigree 1.0913, pedigree (1,1,4,1,1)
  (same comment as for Aluminium III)
- Mercury II [soil, industrial]: 5.4766e-8 kg; lognormal variance with pedigree 1.8327, pedigree (1,1,4,1,1)
  (same comment as for Aluminium III)
- Molybdenum VI [soil, industrial]: 4.2762e-6 kg; lognormal variance with pedigree 1.3872, pedigree (1,1,4,1,1)
  (same comment as for Aluminium III)
- Nickel II [soil, industrial]: 9.4297e-6 kg; lognormal variance with pedigree 1.2835, pedigree (1,1,4,1,1)
  (same comment as for Aluminium III)
- Nitrogen [soil, industrial]: 3.7611e-5 kg; lognormal variance with pedigree 0.54603, pedigree (1,1,4,1,1)
  (same comment as for Aluminium III)
- Phosphorus [soil, industrial]: 0.00011218 kg; lognormal variance with pedigree 0.95381, pedigree (1,1,4,1,1)
  (same comment as for Aluminium III)
- Potassium I [soil, industrial]: 0.0013078 kg; lognormal variance with pedigree 0.62876, pedigree (1,1,4,1,1)
  (same comment as for Aluminium III)
- Selenium IV [soil, industrial]: 2.3551e-6 kg; lognormal variance with pedigree 1.4541, pedigree (1,1,4,1,1)
  (same comment as for Aluminium III)
- Silicon [soil, industrial]: 0.021254 kg; lognormal variance with pedigree 0.28763, pedigree (1,1,4,1,1)
  (same comment as for Aluminium III)
- Silver I [soil, industrial]: 4.7488e-8 kg; lognormal variance with pedigree 1.9298, pedigree (1,1,4,1,1)
  (same comment as for Aluminium III)
- Sodium [soil, industrial]: 0.0008962 kg; lognormal variance with pedigree 0.67666, pedigree (1,1,4,1,1)
  (same comment as for Aluminium III)
- Strontium [soil, industrial]: 5.8217e-5 kg; lognormal variance with pedigree 1.0419, pedigree (1,1,4,1,1)
  (same comment as for Aluminium III)
- Sulfur [soil, industrial]: 0.0012047 kg; lognormal variance with pedigree 0.62132, pedigree (1,1,4,1,1)
  (same comment as for Aluminium III)
- Thallium I [soil, industrial]: 1.7156e-6 kg; lognormal variance with pedigree 1.507, pedigree (1,1,4,1,1)
  (same comment as for Aluminium III)
- Titanium ion [soil, industrial]: 0.00017008 kg; lognormal variance with pedigree 0.89795, pedigree (1,1,4,1,1)
  (same comment as for Aluminium III)
- Zinc II [soil, industrial]: 0.00012387 kg; lognormal variance with pedigree 0.94054, pedigree (1,1,4,1,1)
  (same comment as for Aluminium III)
