# treatment of waste graphical paper, unsanitary landfill, hyperarid infiltration class (-250mm)

Dataset: EcoSpold 2, unit process
Geography: GLO
Time period: 2006-01-01 to 2022-12-31
Technology level: current
Classification: ISIC rev.4 ecoinvent: 3821:Treatment and disposal of non-hazardous waste
Synonyms: municipal waste landfill
Scenario: Business-as-Usual
System model: Allocation at the point of substitution
Share of production covered: 1 %
Generated by: Avraam Symeonidis
Database: ecoinvent
isCopyrightProtected: true

## General comment
This dataset represents the activity of waste disposal of waste graphical paper in a unsanitary landfill. Recommended use of this dataset: For paper, which goes to disposal as part of managed communal waste mixture. Larger amounts of *already separated* paper could go to recycling, depending on country-specific situation. // Waste composition (wet, in ppm): upper heating value 16.61 MJ/kg; lower heating value 14.12 MJ/kg; H2O 110830; O 378670; H 53852; C 404000; S 1406.7; N 3756.6; P 112.95; B 17.19; Cl 1837.5; Br n.a.; F 19.468; I n.a.; Ag 0.047733; As 2.0485; Ba 114.24; Cd 1.6629; Co 0.7359; Cr 14.461; Cu 60.893; Hg 0.13902; Mn 40.221; Mo 4.2976; Ni 9.4431; Pb 80.374; Sb 0.70911; Se 2.5786; Sn n.a.; V n.a.; Zn 124.8; Be 0.97413; Sc n.a.; Sr 58.276; Ti 171.9; Tl 1.719; W n.a.; Si 21255; Fe 1188.4; Ca 3438.1; Al 12391; K 1327.5; Mg 4297.6; Na 918.83; . // Share of carbon in waste that is biogenic 100%. Share of metals in waste not oxidised and bulk-recyclable (exclude very small or thin parts) Iron: 0%; Alu: 0%; Copper: 0%. Overall degradability of waste during 100 years: 27%.

## Included activities start
from final waste deposition (without transports to the site)

## Included activities end
Waste-specific short-term emissions to air via landfill gas and landfill leachate. Waste-specific long-term emissions from landfill.

## Geography
Given name of landfill location is 'infiltration class 1 hyperarid (2018)'. Landfill site with mean annual temperature (MAT) of 8 degC, mean annual precipitation (MAP) of 350 mm/year, and net infiltration of -250 mm/year. Negative infiltration means that leachate flow is reversed and flows upward to the surface, where water is evaporated and dissolved solids become solid evaporites.
Climate adjustments result in an alpha t (temperature) for permafrost areas of 0.999. Total climate adjustments with alpha pt of 0.999.

## Technology
This is an inventory for an unsanitary, sub-controlled landfill for municipal solid waste. Ultimate average landfill height is 15 meters. Operation phase duration is 25 years.Percentage of landfill gas directly emitted is 100w%.
Leachate of the landfill is not treated. Leachate flow is upward to the surface due to net negative infiltration. No leachate treatment can be performed. Based on average waste composition and climate data the end of carbonate phase is estimated to be reached 6681 years after waste deposition. Arid conditions at this location prompt formation of evaporites from landfill contents which are partially eroded by wind. It is assumed that 10% of these evaporites are eroded by wind and airborne. Initial decay in the first 100 years of this waste results in a wind erosion rate corresponding to 319.1 g/m2.year and long-term decay corresponds to wind erosion of 16.11 g/m2.year.

## Reference product
- waste graphical paper: -1 kg; By-product classification Waste; CPC 39990: Other wastes n.e.c.
  main reference product of this activity (supply of disposal service).
  production volume 1 kg
    The amount of the annual production volume is a placeholder value. The contribution of this technology to the different local markets can be found in the markets themselves.
  property heating value, net 14.12 MJ
    Value taken from the general comment of the treatment dataset.
  property price 0 EUR2005
    Waste products are assigned a price of zero as they are assumed to require further treatment.
  properties: aluminium content 0.013935, antimony content 7.9749e-7, arsenic content 2.3039e-6, barium content 0.00012848, beryllium content 1.0955e-6, boron content 1.9333e-5, cadmium content 1.8702e-6, calcium content 0.0038666, carbon allocation 0.403994 kg, carbon content 0.45435, carbon content, non-fossil 0.45435, chlorine content 0.0020665, chromium content 1.6263e-5, cobalt content 8.2762e-7, copper content 6.8483e-5, dry mass 0.88917 kg, fluorine content 2.1895e-5, heating value, gross 16.611 MJ, hydrogen content 0.060564, iron content 0.0013366, lead content 9.0392e-5, magnesium content 0.0048333, manganese content 4.5234e-5, mercury content 1.5635e-7, molybdenum content 4.8333e-6, nickel content 1.062e-5, nitrogen content 0.0042248, oxygen content 0.42587, phosphorus content 0.00012703, potassium content 0.0014929, selenium content 2.9e-6, silicon content 0.023904, silver content 5.3682e-8, sodium content 0.0010334, strontium content 6.5539e-5, sulfur content 0.001582, thallium content 1.9333e-6, titanium content 0.00019333, water content 0.12464, water in wet mass 0.11083 kg, wet mass 1 kg, zinc content 0.00014036

## Inputs from technosphere
- diesel, burned in building machine: 0.046738 MJ; lognormal variance with pedigree 0.088256, pedigree (1,1,4,1,1)
  for waste distribution and compaction.
  Uncertainty: Uncertainty calculated from uncertainty in base parameters.
  properties: heating value, net 1 MJ
- excavation, skid-steer loader: 0.00031708 m3; lognormal variance with pedigree 0.088256, pedigree (1,1,4,1,1)
  application of daily cover.
  Uncertainty: Uncertainty calculated from uncertainty in base parameters.

## Inputs from nature
- Occupation, dump site [natural resource, land]: 0.0023333 m2*year; lognormal variance with pedigree 0.088256, pedigree (1,1,4,1,1)
  for landfill operation phase and spontaneous renaturation.
  Uncertainty: Uncertainty calculated from uncertainty in base parameters.

## Emissions to nature
- Aluminium III [air, low population density, long-term]: 0.0012223 kg; lognormal variance with pedigree 0.093489, pedigree (1,1,4,1,1)
  burden from windblown long-term leachate evaporite in arid climates.
  Uncertainty: Uncertainty calculated from unertainty of the waste composition of this waste, uncertainty in waste decomposition and short-term leaching in landfill
- Aluminium III [air, non-urban air or from high stacks]: 1.6744e-5 kg; lognormal variance with pedigree 0.17479, pedigree (1,1,4,1,1)
  burden from direct release or incineration of landfill biogas; or windblown leachate evaporite in arid climates.
  Uncertainty: Uncertainty calculated from unertainty of the waste composition of this waste, uncertainty in waste decomposition and short-term leaching in landfill
- Antimony ion [air, low population density, long-term]: 9.5911e-9 kg; lognormal variance with pedigree 0.65896, pedigree (1,1,4,1,1)
  (same comment as for Aluminium III)
- Antimony ion [air, non-urban air or from high stacks]: 2.0216e-9 kg; lognormal variance with pedigree 0.47099, pedigree (1,1,4,1,1)
  (same comment as for Aluminium III)
- Arsenic ion [air, low population density, long-term]: 1.9479e-7 kg; lognormal variance with pedigree 0.3771, pedigree (1,1,4,1,1)
  (same comment as for Aluminium III)
- Arsenic ion [air, non-urban air or from high stacks]: 1.1313e-8 kg; lognormal variance with pedigree 0.37017, pedigree (1,1,4,1,1)
  (same comment as for Aluminium III)
- Barium II [air, low population density, long-term]: 7.8949e-6 kg; lognormal variance with pedigree 0.24519, pedigree (1,1,4,1,1)
  (same comment as for Aluminium III)
- Barium II [air, non-urban air or from high stacks]: 3.5372e-6 kg; lognormal variance with pedigree 0.25203, pedigree (1,1,4,1,1)
  (same comment as for Aluminium III)
- Beryllium II [air, low population density, long-term]: 9.5885e-8 kg; lognormal variance with pedigree 0.40121, pedigree (1,1,4,1,1)
  (same comment as for Aluminium III)
- Beryllium II [air, non-urban air or from high stacks]: 1.531e-9 kg; lognormal variance with pedigree 0.47738, pedigree (1,1,4,1,1)
  (same comment as for Aluminium III)
- Boron [air, low population density, long-term]: 1.719e-15 kg; lognormal variance with pedigree 0.7875, pedigree (1,1,4,1,1)
  (same comment as for Aluminium III)
- Boron [air, non-urban air or from high stacks]: 1.719e-6 kg; lognormal variance with pedigree 0.30704, pedigree (1,1,4,1,1)
  (same comment as for Aluminium III)
- Cadmium II [air, low population density, long-term]: 1.5835e-7 kg; lognormal variance with pedigree 0.38389, pedigree (1,1,4,1,1)
  (same comment as for Aluminium III)
- Cadmium II [air, non-urban air or from high stacks]: 8.4169e-9 kg; lognormal variance with pedigree 0.40014, pedigree (1,1,4,1,1)
  (same comment as for Aluminium III)
- Calcium [air, low population density, long-term]: 0.00033173 kg; lognormal variance with pedigree 0.13275, pedigree (1,1,4,1,1)
  (same comment as for Aluminium III)
- Calcium [air, non-urban air or from high stacks]: 1.2102e-5 kg; lognormal variance with pedigree 0.1873, pedigree (1,1,4,1,1)
  (same comment as for Aluminium III)
- Carbon dioxide, non-fossil [air, non-urban air or from high stacks]: 0.17084 kg; lognormal variance with pedigree 0.008, pedigree (1,1,4,1,1)
  burden from direct release or incineration of landfill biogas.
  Uncertainty: Uncertainty calculated from unertainty of the waste composition of this waste, uncertainty in waste decomposition and short-term leaching in landfill
- Chromium III [air, low population density, long-term]: 9.2536e-9 kg; lognormal variance with pedigree 1.9072, pedigree (1,1,4,1,1)
  (same comment as for Aluminium III)
- Chromium III [air, non-urban air or from high stacks]: 4.4562e-9 kg; lognormal variance with pedigree 0.43832, pedigree (1,1,4,1,1)
  (same comment as for Aluminium III)
- Cobalt II [air, low population density, long-term]: 6.7209e-8 kg; lognormal variance with pedigree 0.41041, pedigree (1,1,4,1,1)
  (same comment as for Aluminium III)
- Cobalt II [air, non-urban air or from high stacks]: 6.3945e-9 kg; lognormal variance with pedigree 0.44183, pedigree (1,1,4,1,1)
  (same comment as for Aluminium III)
- Copper ion [air, low population density, long-term]: 6.0813e-6 kg; lognormal variance with pedigree 0.26502, pedigree (1,1,4,1,1)
  (same comment as for Aluminium III)
- Copper ion [air, non-urban air or from high stacks]: 8.0641e-9 kg; lognormal variance with pedigree 0.4173, pedigree (1,1,4,1,1)
  (same comment as for Aluminium III)
- Hydrochloric acid [air, low population density, long-term]: 5.7217e-5 kg; lognormal variance with pedigree 0.1569, pedigree (1,1,4,1,1)
  (same comment as for Aluminium III)
- Hydrochloric acid [air, non-urban air or from high stacks]: 0.00014277 kg; lognormal variance with pedigree 0.12705, pedigree (1,1,4,1,1)
  (same comment as for Aluminium III)
- Hydrogen fluoride [air, low population density, long-term]: 1.7094e-6 kg; lognormal variance with pedigree 0.30323, pedigree (1,1,4,1,1)
  (same comment as for Aluminium III)
- Hydrogen fluoride [air, non-urban air or from high stacks]: 2.1313e-6 kg; lognormal variance with pedigree 0.32544, pedigree (1,1,4,1,1)
  (same comment as for Aluminium III)
- Iron ion [air, low population density, long-term]: 0.0001184 kg; lognormal variance with pedigree 0.16678, pedigree (1,1,4,1,1)
  (same comment as for Aluminium III)
- Iron ion [air, non-urban air or from high stacks]: 4.413e-7 kg; lognormal variance with pedigree 0.2868, pedigree (1,1,4,1,1)
  (same comment as for Aluminium III)
- Lead II [air, low population density, long-term]: 8.0246e-6 kg; lognormal variance with pedigree 0.25578, pedigree (1,1,4,1,1)
  (same comment as for Aluminium III)
- Lead II [air, non-urban air or from high stacks]: 1.2813e-8 kg; lognormal variance with pedigree 0.40184, pedigree (1,1,4,1,1)
  (same comment as for Aluminium III)
- Magnesium [air, low population density, long-term]: 0.00035823 kg; lognormal variance with pedigree 0.12614, pedigree (1,1,4,1,1)
  (same comment as for Aluminium III)
- Magnesium [air, non-urban air or from high stacks]: 7.1694e-5 kg; lognormal variance with pedigree 0.14443, pedigree (1,1,4,1,1)
  (same comment as for Aluminium III)
- Manganese II [air, low population density, long-term]: 2.7796e-6 kg; lognormal variance with pedigree 0.27992, pedigree (1,1,4,1,1)
  (same comment as for Aluminium III)
- Manganese II [air, non-urban air or from high stacks]: 1.2453e-6 kg; lognormal variance with pedigree 0.28667, pedigree (1,1,4,1,1)
  (same comment as for Aluminium III)
- Mercury II [air, low population density, long-term]: 1.3543e-8 kg; lognormal variance with pedigree 0.46358, pedigree (1,1,4,1,1)
  (same comment as for Aluminium III)
- Mercury II [air, non-urban air or from high stacks]: 1.284e-9 kg; lognormal variance with pedigree 0.48166, pedigree (1,1,4,1,1)
  (same comment as for Aluminium III)
- Methane, non-fossil [air, non-urban air or from high stacks]: 0.078907 kg; lognormal variance with pedigree 0.036463, pedigree (1,1,4,1,1)
  (same comment as for Carbon dioxide, non-fossil)
- Molybdenum VI [air, low population density, long-term]: 2.129e-7 kg; lognormal variance with pedigree 0.3827, pedigree (1,1,4,1,1)
  (same comment as for Aluminium III)
- Molybdenum VI [air, non-urban air or from high stacks]: 1.2252e-8 kg; lognormal variance with pedigree 0.41241, pedigree (1,1,4,1,1)
  (same comment as for Aluminium III)
- Nickel II [air, low population density, long-term]: 9.295e-7 kg; lognormal variance with pedigree 0.32688, pedigree (1,1,4,1,1)
  (same comment as for Aluminium III)
- Nickel II [air, non-urban air or from high stacks]: 1.4842e-8 kg; lognormal variance with pedigree 0.40316, pedigree (1,1,4,1,1)
  (same comment as for Aluminium III)
- Nitrate [air, low population density, long-term]: 0.00054311 kg; lognormal variance with pedigree 0.13594, pedigree (1,1,4,1,1)
  (same comment as for Aluminium III)
- Nitrate [air, non-urban air or from high stacks]: 0.0010484 kg; lognormal variance with pedigree 0.13153, pedigree (1,1,4,1,1)
  burden from windblown leachate evaporite in arid climates.
  Uncertainty: Uncertainty calculated from unertainty of the waste composition of this waste, uncertainty in waste decomposition and short-term leaching in landfill
- Nitrogen oxides [air, non-urban air or from high stacks]: 1.3894e-6 kg; lognormal variance with pedigree 0.19109, pedigree (1,1,4,1,1)
  (same comment as for Carbon dioxide, non-fossil)
- Particulate Matter, < 2.5 um [air, low population density, long-term]: 0.012866 kg; lognormal variance with pedigree 0.13093, pedigree (1,1,4,1,1)
  (same comment as for Aluminium III)
- Particulate Matter, < 2.5 um [air, non-urban air or from high stacks]: 0.00042545 kg; lognormal variance with pedigree 0.16929, pedigree (1,1,4,1,1)
  (same comment as for Aluminium III)
- Particulate Matter, > 10 um [air, low population density, long-term]: 0.032165 kg; lognormal variance with pedigree 0.065767, pedigree (1,1,4,1,1)
  (same comment as for Aluminium III)
- Particulate Matter, > 10 um [air, non-urban air or from high stacks]: 0.0010636 kg; lognormal variance with pedigree 0.104133, pedigree (1,1,4,1,1)
  (same comment as for Aluminium III)
- Particulate Matter, > 2.5 um and < 10um [air, low population density, long-term]: 0.019299 kg; lognormal variance with pedigree 0.085521, pedigree (1,1,4,1,1)
  (same comment as for Aluminium III)
- Particulate Matter, > 2.5 um and < 10um [air, non-urban air or from high stacks]: 0.00063817 kg; lognormal variance with pedigree 0.12389, pedigree (1,1,4,1,1)
  (same comment as for Aluminium III)
- Phosphorus [air, low population density, long-term]: 7.4807e-7 kg; lognormal variance with pedigree 0.70337, pedigree (1,1,4,1,1)
  (same comment as for Aluminium III)
- Phosphorus [air, non-urban air or from high stacks]: 1.7032e-7 kg; lognormal variance with pedigree 0.32355, pedigree (1,1,4,1,1)
  (same comment as for Aluminium III)
- Potassium I [air, low population density, long-term]: 0.00010657 kg; lognormal variance with pedigree 0.16374, pedigree (1,1,4,1,1)
  (same comment as for Aluminium III)
- Potassium I [air, non-urban air or from high stacks]: 2.6238e-5 kg; lognormal variance with pedigree 0.17862, pedigree (1,1,4,1,1)
  (same comment as for Aluminium III)
- Selenium IV [air, low population density, long-term]: 9.3914e-8 kg; lognormal variance with pedigree 0.43196, pedigree (1,1,4,1,1)
  (same comment as for Aluminium III)
- Selenium IV [air, non-urban air or from high stacks]: 7.3512e-9 kg; lognormal variance with pedigree 0.42912, pedigree (1,1,4,1,1)
  (same comment as for Aluminium III)
- Silicon [air, low population density, long-term]: 6.3164e-5 kg; lognormal variance with pedigree 0.84867, pedigree (1,1,4,1,1)
  (same comment as for Aluminium III)
- Silicon [air, non-urban air or from high stacks]: 2.8723e-5 kg; lognormal variance with pedigree 0.15929, pedigree (1,1,4,1,1)
  (same comment as for Aluminium III)
- Silver I [air, low population density, long-term]: 4.7669e-9 kg; lognormal variance with pedigree 0.48845, pedigree (1,1,4,1,1)
  (same comment as for Aluminium III)
- Silver I [air, non-urban air or from high stacks]: 6.3212e-12 kg; lognormal variance with pedigree 0.64046, pedigree (1,1,4,1,1)
  (same comment as for Aluminium III)
- Sodium [air, low population density, long-term]: 9.1883e-14 kg; lognormal variance with pedigree 0.65562, pedigree (1,1,4,1,1)
  (same comment as for Aluminium III)
- Sodium [air, non-urban air or from high stacks]: 9.209e-5 kg; lognormal variance with pedigree 0.17425, pedigree (1,1,4,1,1)
  (same comment as for Aluminium III)
- Strontium [air, low population density, long-term]: 5.7362e-6 kg; lognormal variance with pedigree 0.26649, pedigree (1,1,4,1,1)
  (same comment as for Aluminium III)
- Strontium [air, non-urban air or from high stacks]: 9.1592e-8 kg; lognormal variance with pedigree 0.34289, pedigree (1,1,4,1,1)
  (same comment as for Aluminium III)
- Sulfate [air, low population density, long-term]: 0.0003722 kg; lognormal variance with pedigree 0.1616, pedigree (1,1,4,1,1)
  (same comment as for Aluminium III)
- Sulfate [air, non-urban air or from high stacks]: 4.238e-5 kg; lognormal variance with pedigree 0.19128, pedigree (1,1,4,1,1)
  (same comment as for Nitrate)
- Sulfur dioxide [air, non-urban air or from high stacks]: 4.9505e-5 kg; lognormal variance with pedigree 0.23598, pedigree (1,1,4,1,1)
  (same comment as for Carbon dioxide, non-fossil)
- Thallium I [air, low population density, long-term]: 1.6921e-7 kg; lognormal variance with pedigree 0.38277, pedigree (1,1,4,1,1)
  (same comment as for Aluminium III)
- Thallium I [air, non-urban air or from high stacks]: 2.7018e-9 kg; lognormal variance with pedigree 0.45896, pedigree (1,1,4,1,1)
  (same comment as for Aluminium III)
- Titanium ion [air, low population density, long-term]: 1.6959e-5 kg; lognormal variance with pedigree 0.23049, pedigree (1,1,4,1,1)
  (same comment as for Aluminium III)
- Titanium ion [air, non-urban air or from high stacks]: 2.3231e-7 kg; lognormal variance with pedigree 0.31134, pedigree (1,1,4,1,1)
  (same comment as for Aluminium III)
- Zinc II [air, low population density, long-term]: 1.2321e-5 kg; lognormal variance with pedigree 0.24114, pedigree (1,1,4,1,1)
  (same comment as for Aluminium III)
- Zinc II [air, non-urban air or from high stacks]: 1.5979e-7 kg; lognormal variance with pedigree 0.32368, pedigree (1,1,4,1,1)
  (same comment as for Aluminium III)
- Aluminium III [soil, industrial]: 0.011151 kg; lognormal variance with pedigree 0.091244, pedigree (1,1,4,1,1)
  burden from leachate evaporite in arid climates deposited on landflill surface.
  Uncertainty: Uncertainty calculated from unertainty of the waste composition of this waste, uncertainty in waste decomposition and short-term leaching in landfill
- Antimony ion [soil, industrial]: 1.0447e-7 kg; lognormal variance with pedigree 0.59905, pedigree (1,1,4,1,1)
  (same comment as for Aluminium III)
- Arsenic ion [soil, industrial]: 1.8424e-6 kg; lognormal variance with pedigree 0.3571, pedigree (1,1,4,1,1)
  (same comment as for Aluminium III)
- Barium II [soil, industrial]: 0.00010281 kg; lognormal variance with pedigree 0.1699, pedigree (1,1,4,1,1)
  (same comment as for Aluminium III)
- Beryllium II [soil, industrial]: 8.7671e-7 kg; lognormal variance with pedigree 0.39403, pedigree (1,1,4,1,1)
  (same comment as for Aluminium III)
- Boron [soil, industrial]: 1.5471e-5 kg; lognormal variance with pedigree 0.30704, pedigree (1,1,4,1,1)
  (same comment as for Aluminium III)
- Cadmium II [soil, industrial]: 1.4962e-6 kg; lognormal variance with pedigree 0.36411, pedigree (1,1,4,1,1)
  (same comment as for Aluminium III)
- Calcium [soil, industrial]: 0.0030943 kg; lognormal variance with pedigree 0.12536, pedigree (1,1,4,1,1)
  (same comment as for Aluminium III)
- Carbon [soil, industrial]: 0.2684 kg; lognormal variance with pedigree 0.0145976, pedigree (1,1,4,1,1)
  (same comment as for Aluminium III)
- Chloride [soil, industrial]: 0.001638 kg; lognormal variance with pedigree 0.10123, pedigree (1,1,4,1,1)
  (same comment as for Aluminium III)
- Chromium III [soil, industrial]: 1.2329e-7 kg; lognormal variance with pedigree 1.8946, pedigree (1,1,4,1,1)
  (same comment as for Aluminium III)
- Cobalt II [soil, industrial]: 6.6229e-7 kg; lognormal variance with pedigree 0.37486, pedigree (1,1,4,1,1)
  (same comment as for Aluminium III)
- Copper ion [soil, industrial]: 5.4804e-5 kg; lognormal variance with pedigree 0.26444, pedigree (1,1,4,1,1)
  (same comment as for Aluminium III)
- Fluoride [soil, industrial]: 1.5732e-5 kg; lognormal variance with pedigree 0.29457, pedigree (1,1,4,1,1)
  (same comment as for Aluminium III)
- Heat, waste [soil, industrial]: 2.7135 MJ; lognormal variance with pedigree 0.040991, pedigree (1,1,4,1,1)
  burden from short-term decomposition of waste (0-100a).
  Uncertainty: Uncertainty calculated from unertainty of the waste composition of this waste, uncertainty in waste decomposition and short-term leaching in landfill
- Iron ion [soil, industrial]: 0.0010696 kg; lognormal variance with pedigree 0.16568, pedigree (1,1,4,1,1)
  (same comment as for Aluminium III)
- Lead II [soil, industrial]: 7.2336e-5 kg; lognormal variance with pedigree 0.25511, pedigree (1,1,4,1,1)
  (same comment as for Aluminium III)
- Magnesium [soil, industrial]: 0.0038677 kg; lognormal variance with pedigree 0.098458, pedigree (1,1,4,1,1)
  (same comment as for Aluminium III)
- Manganese II [soil, industrial]: 3.6196e-5 kg; lognormal variance with pedigree 0.19724, pedigree (1,1,4,1,1)
  (same comment as for Aluminium III)
- Mercury II [soil, industrial]: 1.2419e-7 kg; lognormal variance with pedigree 0.45465, pedigree (1,1,4,1,1)
  (same comment as for Aluminium III)
- Molybdenum VI [soil, industrial]: 2.0261e-6 kg; lognormal variance with pedigree 0.36081, pedigree (1,1,4,1,1)
  (same comment as for Aluminium III)
- Nickel II [soil, industrial]: 8.4988e-6 kg; lognormal variance with pedigree 0.32036, pedigree (1,1,4,1,1)
  (same comment as for Aluminium III)
- Nitrogen [soil, industrial]: 0.0032343 kg; lognormal variance with pedigree 0.083834, pedigree (1,1,4,1,1)
  (same comment as for Aluminium III)
- Phosphorus [soil, industrial]: 8.2656e-6 kg; lognormal variance with pedigree 0.65666, pedigree (1,1,4,1,1)
  (same comment as for Aluminium III)
- Potassium I [soil, industrial]: 0.0011947 kg; lognormal variance with pedigree 0.12401, pedigree (1,1,4,1,1)
  (same comment as for Aluminium III)
- Selenium IV [soil, industrial]: 9.1122e-7 kg; lognormal variance with pedigree 0.40296, pedigree (1,1,4,1,1)
  (same comment as for Aluminium III)
- Silicon [soil, industrial]: 0.00082633 kg; lognormal variance with pedigree 0.79666, pedigree (1,1,4,1,1)
  (same comment as for Aluminium III)
- Silver I [soil, industrial]: 4.2959e-8 kg; lognormal variance with pedigree 0.48769, pedigree (1,1,4,1,1)
  (same comment as for Aluminium III)
- Sodium [soil, industrial]: 0.00082674 kg; lognormal variance with pedigree 0.17516, pedigree (1,1,4,1,1)
  (same comment as for Aluminium III)
- Strontium [soil, industrial]: 5.2448e-5 kg; lognormal variance with pedigree 0.26067, pedigree (1,1,4,1,1)
  (same comment as for Aluminium III)
- Sulfur [soil, industrial]: 0.0012438 kg; lognormal variance with pedigree 0.13889, pedigree (1,1,4,1,1)
  (same comment as for Aluminium III)
- Thallium I [soil, industrial]: 1.5471e-6 kg; lognormal variance with pedigree 0.37573, pedigree (1,1,4,1,1)
  (same comment as for Aluminium III)
- Titanium ion [soil, industrial]: 0.00015471 kg; lognormal variance with pedigree 0.22588, pedigree (1,1,4,1,1)
  (same comment as for Aluminium III)
- Zinc II [soil, industrial]: 0.00011232 kg; lognormal variance with pedigree 0.23662, pedigree (1,1,4,1,1)
  (same comment as for Aluminium III)
- Heat, waste [water, ground-, long-term]: 12.132 MJ; lognormal variance with pedigree 0.028384, pedigree (1,1,4,1,1)
  burden from long-term decomposition of waste (>100a).
  Uncertainty: Uncertainty calculated from unertainty of the waste composition of this waste, uncertainty in waste decomposition and short-term leaching in landfill
