# treatment of sewage sludge, 75% water, WWT, WW from potato starch production, sanitary landfill

Dataset: EcoSpold 2, unit process
Geography: GLO
Time period: 1994-01-01 to 2022-12-31
Technology level: current
Classification: ISIC rev.4 ecoinvent: 3821:Treatment and disposal of non-hazardous waste
Scenario: Business-as-Usual
System model: Allocation at the point of substitution
Generated by: Nikolia Stoikou
Database: ecoinvent
isCopyrightProtected: true

## General comment
The process represents the treatment of a waste (sewage sludge) that is exclusively generated from another waste treatment. Sewage sludge is generated in the wastewater treatment of 'wastewater from potato starch production'. Recommended use of this dataset: to be used within the specific chain of treatments for 'wastewater from potato starch production'. Share of biogenic carbon in the sludge: 98.939%. Landfill gas capture and utilisation generates 0.03321 kWh of electricity and 0.0599 MJ of useful heat. 0.002598 kg waste mass remains in the landfill even after the long term period.

## Included activities start
The activity starts with the waste being available at the gate of the treatment facility. Collection and transportation of the waste to the treatment plant is not included.

## Included activities end
The activity ends with the waste being treated and waste-specific emissions from the landfill are released to the environment (air due to landfil gas and water due to landfil leachate).

## Geography
Landfill site with mean annual temperature (MAT) of 16.743579766537 degC, mean annual precipitation (MAP) of 1250.84108527132 mm/year, and net infiltration of 790.252035689178 mm/year.The leachate percolating through the landfill has an average residence time of 6.33 years.
References: UN data, 2020. Precipitation, Environment Statistics Database, United Nations Statistics Division Available at: http://data.un.org/Data.aspx?q=precipitation&d=ENV&f=variableID%3a6;
World Bank, 2022. Surface area (sq.km), World Bank Group Available at: https://data.worldbank.org/indicator/AG.SRF.TOTL.K2;
Doka G.,2021. A model for composition-specific life cycle inventories of regionalised wastewater fates, Zurich, Switzerland. http://www.doka.ch/publications.htm

## Technology
Sanitary (controlled) landfill for municipal solid waste. Ultimate average landfill height is 20 meters. Operation phase duration is 30 years. The total raw landfill gas mass produced in the landfill from this waste is 0.145 kg. The total CH4 mass in the raw landfill gas is 0.08138 kg. Percentage of landfill gas directly emitted is 47w%. Percentage of landfill gas captured and flared is 18.02w%. Percentage of landfill gas captured and utilised is 34.98%. Conversion efficiencies are 27.8e% for electricity and 13.5e% for useful heat. Leachate generated during the first 100 years is collected and treated region-specifically before emission. Based on average waste composition and climate data the end of carbonate phase is estimated to be reached 2'863 years after waste deposition.

## Reference product
- heat, district or industrial, other than natural gas: 1 MJ; By-product classification allocatable product; CPC 17300: Steam and hot water; lognormal variance with pedigree 0.11457, pedigree (1,1,1,1,1)
  Net production of heat from landfill gas utilisation.
  Uncertainty: Uncertainty calculated depending on waste input and uncertainty of transfer coefficients in landfill to landfill gas, uncertainty in gas capture and utilisation.
  production volume 4.54002e6 MJ
    Calculated from the production volume of the reference product in proportion to the respective output amounts.
  property corresponding fuel use, propane, furnace >100kW 0 MJ; name fuel_use
    Lower heating value of the fuel input related to the heat/electricity output, taken directly from ecoinvent v3.0 dataset "heat production, natural gas, at industrial furnace >100kW, GLO 2000".
  property price 0.0106 EUR2005
    Average European district heat price from Ecoheatcool and Euroheat 2005-2006, Ecoheat Work package 1: The European heat market. Final report. 10.6 EUR/GJ i s the price of district heat. http://www.solarthermalworld.org/files/Ecoheatcool%20WP1%20Web.pdf?download
  properties: carbon allocation 0 kg, carbon content 0, carbon content, fossil 0, carbon content, non-fossil 0, dry mass 1 kg, heating value, net 1 MJ, water content 0, water in wet mass 0 kg, wet mass 1 kg

## Inputs from technosphere
- EDTA, ethylenediaminetetraacetic acid: 8.30304e-7 kg
- ammonia, anhydrous, liquid: 4.20643e-11, 4.40879e-12, 9.30934e-11, 3.56739e-12, 1.62031e-10, 2.16692e-11, 1.97089e-11, 4.66256e-10, 1.39285e-11 kg (9 suppliers, which the file names only by identifier); sum of these 8.26728e-10 kg
- biowaste: -3.65148e-6, -3.21597e-8 kg (2 suppliers, which the file names only by identifier); sum of these -3.68364e-6 kg
- chemical factory, organics: 1.45379e-12 unit
- chemical, inorganic: 8.64756e-5 kg
- chemical, organic: 0.000117274 kg
- cow milk: 2.20937e-5, 0.0121931 kg (2 suppliers, which the file names only by identifier); sum of these 0.0122152 kg
- cream, from cow milk: 0.000680322 kg
- dairy: 1.11997e-7 m3
- electricity, medium voltage: 0.000627932, 6.96922e-5, 0.000197617, 5.08489e-6, 0.000154995, 2.07543e-6, 1.05897e-5, 1.65387e-5, 0.000639432, 4.74e-5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 kWh (11 suppliers, which the file names only by identifier); sum of these 0.00180633 kWh
- evaporation of milk: 2.10571e-6, 0.000485884 kg (2 suppliers, which the file names only by identifier); sum of these 0.00048799 kg
- heat, district or industrial, natural gas: 0.00116354, 0.00328723, 0.00314799, 1.86852e-5 MJ (4 suppliers, which the file names only by identifier); sum of these 0.00761745 MJ
- heat, district or industrial, other than natural gas: 3.57884e-5 MJ
- hydrogen peroxide, without water, in 50% solution state: 6.15986e-7, 1.29082e-7 kg (2 suppliers, which the file names only by identifier); sum of these 7.45068e-7 kg
- maize starch: 0.000109853 kg
- municipal solid waste: -7.10649e-8, -1.25666e-6, -7.70243e-9, -1.51282e-5, -5.38986e-9 kg (5 suppliers, which the file names only by identifier); sum of these -1.6469e-5 kg
- nitric acid, without water, in 50% solution state: 3.71165e-7, 4.82858e-6, 5.51493e-7, 1.37146e-6, 1.78354e-6, 6.57132e-7, 2.26011e-6, 5.95839e-7, 5.49452e-7, 3.89144e-6 kg (10 suppliers, which the file names only by identifier); sum of these 1.68602e-5 kg
- potassium hydroxide: 7.24373e-7 kg
- propylene glycol, liquid: 1.94769e-8, 9.55694e-9 kg (2 suppliers, which the file names only by identifier); sum of these 2.90338e-8 kg
- refrigerant R134a: 3.24731e-11 kg
- skimmed milk, from cow milk: 0.000102198 kg
- soda ash, light: 1.40609e-8 kg
- sodium hydroxide, without water, in 50% solution state: 2.08368e-5 kg
- sodium hypochlorite, without water, in 15% solution state: 3.72997e-10, 1.77995e-9 kg (2 suppliers, which the file names only by identifier); sum of these 2.15295e-9 kg
- spray-drying of milk: 1.4676e-7, 3.38641e-5 kg (2 suppliers, which the file names only by identifier); sum of these 3.40109e-5 kg
- strawberry: 0.000216547 kg
- sugar, from sugar beet: 0.000233951 kg
- sugar, from sugarcane: 0.000131549 kg
- tap water: 3.61369e-7, 0.00925522, 3.90968e-6, 1.55047e-7, 3.34088e-5, 2.8931e-7, 4.47404e-5, 1.01709e-7, 7.79381e-7 kg (9 suppliers, which the file names only by identifier); sum of these 0.00933896 kg
- transport, freight, lorry, unspecified: 2.20937e-6 metric ton*km
- wastewater from potato starch production: -1.64499e-7, -3.41206e-5 m3 (2 suppliers, which the file names only by identifier); sum of these -3.42851e-5 m3
- water, deionised: 4.46942e-9, 1.24159e-6, 4.05346e-6 kg (3 suppliers, which the file names only by identifier); sum of these 5.29952e-6 kg
- wheat grain: 1.01388e-5, 5.37175e-8 kg (2 suppliers, which the file names only by identifier); sum of these 1.01925e-5 kg
- whey: 4.39054e-5 kg

## Inputs from nature
- Water, unspecified natural origin [natural resource, in water]: 2.41581e-5 m3
- Water, well, in ground [natural resource, in water]: 1.9822e-6 m3

## Emissions to nature
- Ammonia [air, unspecified]: 8.26728e-10 kg
- Methane, chlorodifluoro-, HCFC-22 [air, unspecified]: 3.24731e-11 kg
- Water [air, unspecified]: 1.68561e-6 m3
