# treatment of wastewater from ceramic production, wastewater treatment

Dataset: EcoSpold 2, unit process
Geography: RoW
Time period: 2010-01-01 to 2022-12-31
Technology level: current
Classification: ISIC rev.4 ecoinvent: 3700:Sewerage
Scenario: Business-as-Usual
System model: Allocation at the point of substitution
Generated by: Nikolia Stoikou
Database: ecoinvent
isCopyrightProtected: true

## General comment
This dataset represents the treatment of a wastewater, generated from an ordinary transforming activity. Purification in wastewater treatment of 'wastewater from ceramic production'. Recommended use of this dataset: to be used for wastewaters, generated from ordinary transforming activities, of equal or similar composition. The wastewater has a content of TOC: 0.000000021326 kg/m3, COD: 0.000000083 kg/m3 and BOD: 0.00000004 kg/m3. TOC is equal to C present in the wastewater, COD is calculated as TOC/0.2565 and BOD is calculated as COD/0.53034. Detailed elemental composition can be found in the properties of the wastewater treated. Share of biogenic carbon in the sludge: 0%.

## Included activities start
The activity starts with the wastewater being available at the gate of the treatment facility. Collection and transportation of the wastewater to the treatment plant is not included.

## Included activities end
The activity ends with the wastewater being treated and waste-specific emissions released to the environment. Expenditures from treatment of wastewater in waste treatment plant are included as well as relevant infrastructure of the plant. Emissions from any sludge digestion, biogas generation and utilization (heeding specific wastewater composition) are also included. Waste-specific direct emissions of untreated wastewater and required territory-specific infrastructure for sewers are not contained within this dataset but instead in the regional market datasets for this wastewater.

## Geography
The site has mean annual temperature (MAT) of 16.743579766537 degC, mean annual precipitation (MAP) of 1250.84108527132 mm/year, mean annual actual evaporation (EAT) of 460.58904958214 mm/year. In the WWT plant, 0% of its water input are lost due to evaporation from pools, 0% of water is *gained* from organic mass degradation, and 0.000027% is removed off site via sludge disposal. (References: UN data, 2020. Precipitation, Environment Statistics Database, United Nations Statistics Division Available at: http://data.un.org/Data.aspx?q=precipitation&d=ENV&f=variableID%3a6; World Bank, 2022. Surface area (sq.km), World Bank Group Available at: https://data.worldbank.org/indicator/AG.SRF.TOTL.K2; Doka G.,2021. A model for composition-specific life cycle inventories of regionalised wastewater fates, Zurich, Switzerland. http://www.doka.ch/publications.htm)

## Technology
This is an inventory for the disposal of a selected wastewater in Global. The reference unit is 1 m3 wastewater input. This activity represents the treatment of a specific wastewater in a WWT plant (while direct emissions and sewering are heeded in the upstream market dataset for this wastewater). The size of the treatment plant infrastructure is for a supranational region average territory situation. The assumed size of the WWTP treats 82.2 Mio m3 per year. The mixture of WWTP with one, two, or three stages is 8.2%-41.2%-50.6%. The actual, waste-specific oxygen requirement in the biological stages is 0.0000001021326 kg O. The digestion process produces 0.0007425715 litres of biogas with an energy content of 0.0000136276MJ. 60.5% of the biogas is utilized for energy. The remainder is flared. The gross electric efficiency is 26.564%. The gross thermal efficiency is 47.853%. After digestion, the remaining total sludge mass (dry matter) is 0.0003519kg DM.

## Reference product
- iron scrap, sorted, pressed: 1 kg; By-product classification Recyclable; CPC 39310: Slag, dross, scalings and other waste from the manufacture of iron or steel; lognormal variance with pedigree 0.3611, pedigree (1,1,1,1,1)
  scrap output from used infrastructure for wastewater treatment plant.
  Uncertainty: Uncertainty calculated from wastewater technosphere fate uncertainty and treatment infrastructure uncertainty.
  production volume 3.96505e-5 kg
    Calculated in proportion to wastewater reference product.
  property price 0.175 EUR2005
    Temporary price data. Calculated as 90% of purchasers price based on: 2005 import and export prices (total trades (USD) divided by total weight (kg) in biggest economies of the world: EU27, USA, Brasil, China, India, Japan and Russia) from UN Commodity Trade Statistics Database (http://data.un.org/Explorer.aspxDatabase [Accessed 2011.06.20]). Commodity: Waste or scrap, of cast iron
  properties: carbon allocation 0 kg, carbon content 0, carbon content, fossil 0, carbon content, non-fossil 0, dry mass 1 kg, water content 0, water in wet mass 0 kg, wet mass 1 kg

## Inputs from technosphere
- ammonia, anhydrous, liquid: 3.58547e-5, 3.75796e-6, 3.65963e-5, 0.000138112, 1.84704e-5, 1.67995e-5, 0.000397427, 1.18724e-5 kg (8 suppliers, which the file names only by identifier); sum of these 0.00065889 kg
- bilge oil: -9.64814e-8, -2.00628e-7 kg (2 suppliers, which the file names only by identifier); sum of these -2.9711e-7 kg
- ceramic factory: 6.71435e-12 unit
- chemical factory, organics: 4.68138e-12 unit
- chemical, inorganic: 5.08612e-6 kg
- clay: 0.000713399 kg
- electricity, medium voltage: 0.0037512, 0.00117049, 3.48573e-5, 0.000177856, 0.000190095, 0.0107394, 5.92182e-5, 0.000587429 kWh (8 suppliers, which the file names only by identifier); sum of these 0.0167105 kWh
- feldspar: 0.000636184 kg
- hazardous waste, for underground deposit: -1.71216e-7 kg
- heat, district or industrial, natural gas: 0.0102421, 0.0303343, 0.00049847 MJ (3 suppliers, which the file names only by identifier); sum of these 0.0410748 MJ
- hydrochloric acid, without water, in 30% solution state: 0.000719048 kg
- indium: 0.000194243 kg
- inert waste, for final disposal: -0.000213181 kg
- kaolin: 0.000745293 kg
- methanol: 3.98133e-5 kg
- municipal solid waste: -8.45329e-8, -4.87214e-6, -3.04392e-8, -5.9785e-5, -2.13002e-8 kg (5 suppliers, which the file names only by identifier); sum of these -6.47934e-5 kg
- polyethylene, high density, granulate: 2.53467e-6 kg
- silica sand: 0.000421325 kg
- sodium hydroxide, without water, in 50% solution state: 0.00120714 kg
- spent solvent mixture: -8.36436e-8, -3.26825e-8 kg (2 suppliers, which the file names only by identifier); sum of these -1.16326e-7 kg
- stucco: 0.000209823 kg
- tap water: 1.02143e-6, 4.25669e-5, 1.68809e-6, 3.14989e-6, 0.000487115, 1.10737e-6, 0.000362981, 8.48557e-6 kg (8 suppliers, which the file names only by identifier); sum of these 0.000908115 kg
- tin: 1.98354e-5 kg
- waste emulsion paint: -2.4237e-10, -2.28468e-11 kg (2 suppliers, which the file names only by identifier); sum of these -2.65217e-10 kg
- waste mineral oil: -3.43754e-7, -1.31286e-7 kg (2 suppliers, which the file names only by identifier); sum of these -4.7504e-7 kg
- waste plastic, mixture: -8.10404e-9, -4.09513e-11, -9.03525e-11, -5.67328e-8, -5.41481e-10, -6.90502e-9, -2.12378e-10, -2.23651e-10 kg (8 suppliers, which the file names only by identifier); sum of these -7.28507e-8 kg
- wastewater from ceramic production: -8.95e-5 m3
- water, deionised: 0.08785 kg

## Inputs from nature
- Water, well, in ground [natural resource, in water]: 1.7793e-5 m3

## Emissions to nature
- Ethanol [air, urban air close to ground]: 3.98133e-5 kg
- Particulate Matter, < 2.5 um [air, unspecified]: 1.46205e-5 kg
- Water [air, unspecified]: 2.80517e-6 m3
- Water [water, unspecified]: 1.42459e-5 m3
