# isophorondiisocyanate production

Dataset: EcoSpold 2, unit process
Geography: RoW
Time period: 2020-01-01 to 2022-12-31
Technology level: current
Classification: ISIC rev.4 ecoinvent: 2011:Manufacture of basic chemicals
Scenario: Business-as-Usual
System model: Allocation at the point of substitution
Generated by: Daria Dellenbach
Database: ecoinvent
isCopyrightProtected: true

## General comment
This dataset represents the production of 1 kg of isophorondiisocyanate. Emissions are estimated. Energy consumptions, infrastructure and transports are calculated with standard values. 'isophorondiisocyante' is an organic substance with the CAS no.: 004098-71-9. It is called '5-isocyanato-1-(isocyanatomethyl)-1,3,3-trimethylcyclohexane' under IUPAC naming and its molecular formula is: C12H18N2O2. It is liquid under normal conditions of temperature and pressure as a colorless to yellowish liquid with a pungent odor. It is modelled as a pure substance. There are no publicly available information about the consumption of this substance on a consumer level. On industrial sites, the substance is used for the manufacture of products in the following sectors: polymers and coating products, plastics and chemicals (use as an intermediate).
Reference(s):
Six C., Richter F., (2005). Isocyantes, Organic, Ullmanns Encyclopedia of Industrial Chemistry.
Chemiepark GENDORF, Umwelterklärung 2016, https://www.gendorf.de/Nachbarn/Umweltschutz/Industrie%20und%20Nachhaltigkeit
Chemiepark GENDORF, Umwelterklärung 2017, https://www.gendorf.de/Nachbarn/Umweltschutz/Industrie%20und%20Nachhaltigkeit
Chemiepark GENDORF, Umwelterklärung 2020, https://www.gendorf.de/Nachbarn/Umweltschutz/Industrie%20und%20Nachhaltigkeit
Hazardous Substances Data Bank (HSDB): Isophorondiisocyanate (retrieved 11-2020).
US Environmental Protection Agency (US EPA):Isophorondiisocyanate (retrieved 11-2020).
Eller K., Henkes E., Rossbacher R., Hoke H., (2012). Amines, Aliphatic, Ullmann's Encyclopedia of Industrial Chemistry.
Hischier, R. (2005) Establishing Life Cycle Inventories of Chemicals Based on Differing Data Availability (9 pp). The International Journal of Life Cycle Assessment, Volume 10, Issue 1, pp 59–67. 10.1065/lca2004.10.181.7

## Included activities start
Cradle to gate. The activity starts when the raw materials enter the process.

## Included activities end
Production of isophorondiisocyanate production including materials, energy uses, infrastructure and emissions.

## Technology
Isophorondiisocyanate is manufactured in four reactions. Acetone is condensed with a base catalyst to yield isophorone. Isophorone is reacted with hydrogen cyanide to isophoronnitrile, this is further reacted with ammonium and hydrogen to give isophorondiamine. In a last step, isophorondiamine is phosgenated to result in isophorondiisocyanate. A yield of 95% per reaction step was assumed.
3C3H6O+OH- (cat) -> C9H14O+2H2O+OH- (cat)
C9H14O+HCN -> C10H15NO
C10H15NO+NH3+3H2 -> C10H22N2+H2O
C10H22N2+2COCl2 -> C12H18N2O2+2HCl
Sodium hydroxide is added to neutralize the formed hydrochloric acid. The catalyst in not consider significant in terms of emissions for the reaction and it is therefore not included in the dataset.
Reference(s):
Six C., Richter F., (2005). Isocyantes, Organic, Ullmanns Encyclopedia of Industrial Chemistry.
Eller K., Henkes E., Rossbacher R., Hoke H., (2012). Amines, Aliphatic, Ullmann's Encyclopedia of Industrial Chemistry.

## Reference product
- isophorondiisocyante: 1 kg; name RP; By-product classification allocatable product; CPC 34150: Amine-function compounds; oxygen-function amino-compounds, except lysine and its esters and salts thereof and […]; CAS 4098-71-9
  production volume 2.9779e8 kg
    Calculated value. The global production volume is extrapolated from the European Union production volume using the global nominal GDP. The annual production value of Europe in the year 2019 is 5.5E+8 kg. This value is divided by the European Unions share of the average GDP (constant 2017 international USD from 2015-2019), 15.59% (2019).
    Reference:
    ECHA, isophorone diisocyanate (2019), last accessed May 2022, https://echa.europa.eu/substance-information/-/substanceinfo/100.021.692, accessed 15-06-2022.
    World bank (2022): GDP, available here: https://data.worldbank.org/indicator/NY.GDP.MKTP.PP.KD, accessed 17-05-2022.
  property price 7.46534 EUR2005
    The price is calculated based on price information from Alibaba (available here: https://www.alibaba.com/product-detail/IPDI-of-isophorone-diisocyanate-made-by_1600582007088.html?spm=a2700.7724857.0.0.4d212544h9qIQ2 and https://www.alibaba.com/product-detail/Isophorone-diisocyanate-IPDI-Desmodur-I-4098_1600316554903.html?spm=a2700.7724857.0.0.4d212544h9qIQ2, last accessed 2022-08-04).
    The prices were converted to EUR based on the annual exchange rates published by the European Central Bank (https://sdw.ecb.europa.eu/quickview.do?SERIES_KEY=120.EXR.A.USD.EUR.SP00.A, last accessed on 2022-02-15) and adjusted for inflation relative to 2005 using the producer price index (PPI) of the euro area, published by eurostat (https://appsso.eurostat.ec.europa.eu/nui/show.do?dataset=sts_inpp_a&lang=en, last accessed on 2022-05-04)., last accessed 2022-08-04).
  properties: carbon allocation 0.648402 kg, carbon content 0.648402, carbon content, fossil 0.648402, carbon content, non-fossil 0, dry mass 1 kg, water content 0, water in wet mass 0 kg, wet mass 1 kg

## Inputs from technosphere
- acetone, liquid: 0.924268 kg; lognormal variance with pedigree 0.01, pedigree (2,5,2,1,2)
  Calculated based on stoichiometry. See technology comment for the description of the reaction.
  properties: carbon content, fossil 0.62069, dry mass 1 kg, heating value, net 31.32 MJ, wet mass 1 kg
- ammonia, anhydrous, liquid: 0.00466587, 0.000489034, 0.00476238, 0.0179729, 0.0024036, 0.00218616, 0.0517182, 0.00154498 kg (8 suppliers, which the file names only by identifier); sum of these 0.0857431 kg; lognormal variance with pedigree 0.01, pedigree (2,5,2,1,2)
  (same comment as for acetone, liquid)
  properties: dry mass 1 kg, wet mass 1 kg
- chemical factory, organics: 1.344e-9 unit; lognormal variance with pedigree 0.3494, pedigree (2,5,2,4,4)
  Calculated based on literature data published by the industry. For this activity, no information was readily available concerning infrastructure and land-use. Therefore, the infrastructure is estimated based on data from two chemical factories, the BASF site of Ludwigshafen and the chemical factory in Gendorf (which are both located in Germany), which produce a wide range of chemical substances. Based on this data, the following assumptions are made: the built area amounts to about 4.2 ha, the plant has an average output of 50'000 t/a and a lifespan of fifty years. The estimated infrastructure amount is therefore 4.00 E-10 units per kg of produced chemical.
  Since this process comprises 4 reactions to produce the final product, the default value was scaled up. To produce 1 kg of output, 2.36 kg of intermediate products are necessary. The value was therefore scaled up with the factor 3.36.
  References:
  Althaus H.-J., Chudacoff M., Hischier R., Jungbluth N., Osses M. and Primas A. (2007) Life Cycle Inventories of Chemicals. ecoinvent report No. 8, v2.0. EMPA Dübendorf, Swiss Centre for Life Cycle Inventories, Dübendorf, CH.
  Gendorf (2000) Umwelterklärung 2000, Werk Gendorf. Werk Gendorf, Burgkirchen.
- compressed air, 1000 kPa gauge: 1.51926 m3; lognormal variance with pedigree 0.05, pedigree (2,5,2,4,4)
  Calculated based on literature data published by the GENDORF Chemical Park. The factory produced an average of 2462760 tonnes of chemical substances (including intermediates) per year in the years 2015-2019. The average consumption of compressed air in the years 2015-2019 was 1113557454 m3 per year. This equals 0.45216 m3/kg chemical produced.
  Since this process comprises 4 reactions to produce the final product, the default value was scaled up. To produce 1 kg of output, 2.36 kg of intermediate products are necessary. The value was therefore scaled up with the factor 3.36.
  References:
  Chemiepark GENDORF, Umwelterklärung 2016, https://www.gendorf.de/Nachbarn/Umweltschutz/Industrie%20und%20Nachhaltigkeit
  Chemiepark GENDORF, Umwelterklärung 2017, https://www.gendorf.de/Nachbarn/Umweltschutz/Industrie%20und%20Nachhaltigkeit
  Chemiepark GENDORF, Umwelterklärung 2020, https://www.gendorf.de/Nachbarn/Umweltschutz/Industrie%20und%20Nachhaltigkeit
- electricity, medium voltage: 0.305552, 0.0953421, 0.00283929, 0.0144872, 0.874772, 0.0478488 kWh (6 suppliers, which the file names only by identifier); sum of these 1.34084 kWh; lognormal variance with pedigree 0.05, pedigree (2,5,2,4,4)
  Calculated based on literature data published by the GENDORF Chemical Park. The factory produced an average of 2462760 tonnes of chemical substances (including intermediates) per year in the years 2015-2019. The average consumption of electricity in the years 2015-2019 was 982796751 kWh per year. This equals 0.39906 kWh/kg chemical produced.
  Since this process comprises 4 reactions to produce the final product, the default value was scaled up. To produce 1 kg of output, 2.36 kg of intermediate products are necessary. The value was therefore scaled up with the factor 3.36.
  References:
  Chemiepark GENDORF, Umwelterklärung 2016, https://www.gendorf.de/Nachbarn/Umweltschutz/Industrie%20und%20Nachhaltigkeit
  Chemiepark GENDORF, Umwelterklärung 2017, https://www.gendorf.de/Nachbarn/Umweltschutz/Industrie%20und%20Nachhaltigkeit
  Chemiepark GENDORF, Umwelterklärung 2020, https://www.gendorf.de/Nachbarn/Umweltschutz/Industrie%20und%20Nachhaltigkeit
- heat, district or industrial, natural gas: 6.23616, 0.102476 MJ (2 suppliers, which the file names only by identifier); sum of these 6.33864 MJ; lognormal variance with pedigree 0.05, pedigree (2,5,2,4,4)
  Calculated based on literature data published by the GENDORF Chemical Park. The factory produced an average of 2462760 tonnes of chemical substances (including intermediates) per year in the years 2015-2019. The average consumption of natural gas in the years 2015-2019 was 4645920000 MJ per year. This equals 1.8865 MJ/kg chemical produced.
  Since this process comprises 4 reactions to produce the final product, the default value was scaled up. To produce 1 kg of output, 2.36 kg of intermediate products are necessary. The value was therefore scaled up with the factor 3.36.
  References:
  Chemiepark GENDORF, Umwelterklärung 2016, https://www.gendorf.de/Nachbarn/Umweltschutz/Industrie%20und%20Nachhaltigkeit
  Chemiepark GENDORF, Umwelterklärung 2017, https://www.gendorf.de/Nachbarn/Umweltschutz/Industrie%20und%20Nachhaltigkeit
  Chemiepark GENDORF, Umwelterklärung 2020, https://www.gendorf.de/Nachbarn/Umweltschutz/Industrie%20und%20Nachhaltigkeit
  properties: heating value, net 1 MJ
- heat, from steam, in chemical industry: 0.698208 MJ; lognormal variance with pedigree 0.05, pedigree (2,5,2,4,4)
  Calculated based on literature data published by the GENDORF Chemical Park. The factory produced an average of 2462760 tonnes of chemical substances (including intermediates) per year in the years 2015-2019. The average consumption of steam (internal and external sources) in the years 2015-2019 was 511785800 MJ per year. This equals 0.2078 MJ/kg chemical produced.
  Since this process comprises 4 reactions to produce the final product, the default value was scaled up. To produce 1 kg of output, 2.36 kg of intermediate products are necessary. The value was therefore scaled up with the factor 3.36.
  References:
  Chemiepark GENDORF, Umwelterklärung 2016, https://www.gendorf.de/Nachbarn/Umweltschutz/Industrie%20und%20Nachhaltigkeit
  Chemiepark GENDORF, Umwelterklärung 2017, https://www.gendorf.de/Nachbarn/Umweltschutz/Industrie%20und%20Nachhaltigkeit
  Chemiepark GENDORF, Umwelterklärung 2020, https://www.gendorf.de/Nachbarn/Umweltschutz/Industrie%20und%20Nachhaltigkeit
  properties: heating value, net 1 MJ
- hydrogen cyanide: 0.140237 kg; lognormal variance with pedigree 0.01, pedigree (2,5,2,1,2)
  (same comment as for acetone, liquid)
  properties: carbon content, fossil 0.444444, dry mass 1 kg, heating value, net 17.95 MJ, wet mass 1 kg
- hydrogen, liquid: 0.0306008 kg; lognormal variance with pedigree 0.01, pedigree (2,5,2,1,2)
  (same comment as for acetone, liquid)
  properties: dry mass 1 kg, heating value, net 120.21 MJ, wet mass 1 kg
- nitrogen, liquid: 0.0497683 kg; lognormal variance with pedigree 0.05, pedigree (2,5,2,4,4)
  Calculated based on literature data published by the GENDORF Chemical Park. The factory produced an average of 2462760 tonnes of chemical substances (including intermediates) per year in the years 2015-2019. The average consumption of nitrogen, liquid in the years 2015-2019 was 29168033 m3 per year. This equals 0.014812 kg/kg chemical produced. The density to convert to kg was assumed to be 1.2506 kg/m3.
  Since this process comprises 4 reactions to produce the final product, the default value was scaled up. To produce 1 kg of output, 2.36 kg of intermediate products are necessary. The value was therefore scaled up with the factor 3.36.
  References:
  Chemiepark GENDORF, Umwelterklärung 2016, https://www.gendorf.de/Nachbarn/Umweltschutz/Industrie%20und%20Nachhaltigkeit
  Chemiepark GENDORF, Umwelterklärung 2017, https://www.gendorf.de/Nachbarn/Umweltschutz/Industrie%20und%20Nachhaltigkeit
  Chemiepark GENDORF, Umwelterklärung 2020, https://www.gendorf.de/Nachbarn/Umweltschutz/Industrie%20und%20Nachhaltigkeit
  properties: dry mass 1 kg, wet mass 1 kg
- phosgene, liquid: 0.946238 kg; lognormal variance with pedigree 0.01, pedigree (2,5,2,1,2)
  (same comment as for acetone, liquid)
  properties: carbon content, fossil 0.122449, dry mass 1 kg, heating value, net 3.68 MJ, wet mass 1 kg
- sodium hydroxide, without water, in 50% solution state: 0.71973 kg; lognormal variance with pedigree 0.01, pedigree (2,5,2,1,2)
  Sodium hydroxide was added to neutralise the formed acid. Calculated based on stoichiometry. See technology comment for the description of the reaction.
  properties: dry mass 1 kg, heating value, net 3.03 MJ, wet mass 1 kg
- tap water: 0.000141654, 0.00590324, 0.000234107, 0.000436831, 0.0675538, 0.000153571, 0.00117679 kg (7 suppliers, which the file names only by identifier); sum of these 0.0756 kg; lognormal variance with pedigree 0.05, pedigree (2,5,2,4,4)
  Calculated based on literature data published by the GENDORF Chemical Park. The factory produced an average of 2462760 tonnes of chemical substances (including intermediates) per year in the years 2015-2019. The average consumption of tap water in the years 2015-2019 was 55352 t per year. This equals 0.0225 kg/kg chemical produced.
  Since this process comprises 4 reactions to produce the final product, the default value was scaled up. To produce 1 kg of output, 2.36 kg of intermediate products are necessary. The value was therefore scaled up with the factor 3.36.
  References:
  Chemiepark GENDORF, Umwelterklärung 2016, https://www.gendorf.de/Nachbarn/Umweltschutz/Industrie%20und%20Nachhaltigkeit
  Chemiepark GENDORF, Umwelterklärung 2017, https://www.gendorf.de/Nachbarn/Umweltschutz/Industrie%20und%20Nachhaltigkeit
  Chemiepark GENDORF, Umwelterklärung 2020, https://www.gendorf.de/Nachbarn/Umweltschutz/Industrie%20und%20Nachhaltigkeit
  properties: carbon content, fossil 0.00178991, dry mass 0.000337476 kg, water content 2962.17, wet mass 1 kg
  note on carbon content, fossil: Bicarbonate content is 2.93 mol/m3. CO2 content is 0.1 mol/m3 (ecoinvent v2.2 report 8, Tab 93.1).
- wastewater, average: -2.71428e-8, -7.62358e-6 m3 (2 suppliers, which the file names only by identifier); sum of these -7.65072e-6 m3; lognormal variance with pedigree 0.0498, pedigree (2,5,1,4,4)
  Calculated based on literature data published by the GENDORF Chemical Park. The factory produced an average of 2462760 tonnes of chemical substances (including intermediates) per year in the years 2015-2019. The average ouput of wastewater going to an external wastewater treatment plant in the years 2015-2019 was 5608 m3 per year. This equals 0.000002277 m3/kg chemical produced.
  Since this process comprises 4 reactions to produce the final product, the default value was scaled up. To produce 1 kg of output, 2.36 kg of intermediate products are necessary. The value was therefore scaled up with the factor 3.36.
  References:
  Chemiepark GENDORF, Umwelterklärung 2016, https://www.gendorf.de/Nachbarn/Umweltschutz/Industrie%20und%20Nachhaltigkeit
  Chemiepark GENDORF, Umwelterklärung 2017, https://www.gendorf.de/Nachbarn/Umweltschutz/Industrie%20und%20Nachhaltigkeit
  Chemiepark GENDORF, Umwelterklärung 2020, https://www.gendorf.de/Nachbarn/Umweltschutz/Industrie%20und%20Nachhaltigkeit
  production volume
    Calculated from the production volume of the reference product in proportion to the respective output amounts.
  properties: carbon content, non-fossil 0.194039, dry mass 0.346837 kg, water content 2882.2, wet mass 1000 kg
  note on carbon content, non-fossil: 0.0673 kg TOC/m3 (Tab A.17, ecoinvent v2.2 report 13_I). TOC was considered as Total Carbon.

## Inputs from nature
- Water, cooling, unspecified natural origin [natural resource, in water]: 0.0494155 m3; lognormal variance with pedigree 0.05, pedigree (2,5,2,4,4)
  Calculated based on literature data published by the GENDORF Chemical Park. The factory produced an average of 2462760 tonnes of chemical substances (including intermediates) per year in the years 2015-2019. The average amount of cooling water released in the years 2015-2019 was 34408800 t per year. It was assumed that 5% of the cooling water was emitted to air during its use, therefore, to calculate the input of cooling water, the output value reported by GENDORF was scaled up by the factor 1/0.95. This equals 0.014707 m3/kg chemical produced.
  References:
  Chemiepark GENDORF, Umwelterklärung 2016, https://www.gendorf.de/Nachbarn/Umweltschutz/Industrie%20und%20Nachhaltigkeit
  Chemiepark GENDORF, Umwelterklärung 2017, https://www.gendorf.de/Nachbarn/Umweltschutz/Industrie%20und%20Nachhaltigkeit
  Chemiepark GENDORF, Umwelterklärung 2020, https://www.gendorf.de/Nachbarn/Umweltschutz/Industrie%20und%20Nachhaltigkeit
- Water, river [natural resource, in water]: 0.00324384 m3; lognormal variance with pedigree 0.05, pedigree (2,5,2,4,4)
  Calculated based on literature data published by the GENDORF Chemical Park. The factory produced an average of 2462760 tonnes of chemical substances (including intermediates) per year in the years 2015-2019. The average consumption of river water in the years 2015-2019 was 22000820 t per year. However, since the cooling water is modelled as an input, the amount of river water was adjusted to avoid double counting. 55% of the input amount of cooling water was deducted from the amount of river water, as that is the share of river water versus well water. This equals 0.00096543 m3/kg chemical produced.
  Since this process comprises 4 reactions to produce the final product, the default value was scaled up. To produce 1 kg of output, 2.36 kg of intermediate products are necessary. The value was therefore scaled up with the factor 3.36.
  References:
  Chemiepark GENDORF, Umwelterklärung 2016, https://www.gendorf.de/Nachbarn/Umweltschutz/Industrie%20und%20Nachhaltigkeit
  Chemiepark GENDORF, Umwelterklärung 2017, https://www.gendorf.de/Nachbarn/Umweltschutz/Industrie%20und%20Nachhaltigkeit
  Chemiepark GENDORF, Umwelterklärung 2020, https://www.gendorf.de/Nachbarn/Umweltschutz/Industrie%20und%20Nachhaltigkeit
- Water, well, in ground [natural resource, in water]: 0.00274351 m3; lognormal variance with pedigree 0.05, pedigree (2,5,2,4,4)
  Calculated based on literature data published by the GENDORF Chemical Park. The factory produced an average of 2462760 tonnes of chemical substances (including intermediates) per year in the years 2015-2019. The average consumption of well water in the years 2015-2019 was 18607480 t per year. However, since the cooling water is modelled as an input, the amount of well water was adjusted to avoid double counting. 45% of the input amount of cooling water was deducted from the amount of well water, as that is the share of well water versus river water. This equals 0.00081652 m3/kg chemical produced.
  Since this process comprises 4 reactions to produce the final product, the default value was scaled up. To produce 1 kg of output, 2.36 kg of intermediate products are necessary. The value was therefore scaled up with the factor 3.36.
  References:
  Chemiepark GENDORF, Umwelterklärung 2016, https://www.gendorf.de/Nachbarn/Umweltschutz/Industrie%20und%20Nachhaltigkeit
  Chemiepark GENDORF, Umwelterklärung 2017, https://www.gendorf.de/Nachbarn/Umweltschutz/Industrie%20und%20Nachhaltigkeit
  Chemiepark GENDORF, Umwelterklärung 2020, https://www.gendorf.de/Nachbarn/Umweltschutz/Industrie%20und%20Nachhaltigkeit

## Emissions to nature
- Acetone [air, unspecified]: 0.00169999 kg; lognormal variance with pedigree 0.0494, pedigree (2,5,2,1,2)
  Calculated losses, based on the boiling point of a chemical, to water or to air. In addition, unreacted chemicals are assumed to go to wastewater treatment, which has a conversion rate in biological treatment of 95% of carbon into carbon dioxide. The remaining 5% are released as emissions to water.
- Carbon dioxide, fossil [air, unspecified]: 0.349127 kg; lognormal variance with pedigree 0.01, pedigree (2,5,2,1,2)
  Calculated based on the carbon content of unreacted chemical substances. The unreacted chemicals are assumed to go to wastewater treatment, which has a conversion rate in biological treatment of 95% of carbon into carbon dioxide. The remaining 5% are released as emissions to water, unspecified.
- Hydrogen [air, unspecified]: 0.000153004 kg; lognormal variance with pedigree 0.0494, pedigree (2,5,2,1,2)
  (same comment as for Acetone)
- Nitrogen [air, unspecified]: 0.0497683 kg; lognormal variance with pedigree 0.0894, pedigree (2,5,2,4,4)
  Calculated value. The amount of nitrogen released to air is equal to the amount of nitrogen entering the activity.
  Since this process comprises 4 reactions to produce the final product, the default value was scaled up. To produce 1 kg of output, 2.36 kg of intermediate products are necessary. The value was therefore scaled up with the factor 3.36.
- Phosgene [air, unspecified]: 0.00473119 kg; lognormal variance with pedigree 0.0494, pedigree (2,5,2,1,2)
  (same comment as for Acetone)
- Water [air, unspecified]: 0.0049392 m3; lognormal variance with pedigree 0.0894, pedigree (2,5,2,4,4)
  Calculated based on literature data published by the GENDORF Chemical Park. The factory produced an average of 2462760 tonnes of chemical substances (including intermediates) per year in the years 2015-2019. To determine the emissions of water to air, the difference of all water inputs (from river, well, tap water and cooling) and outputs (wastewater, emissions to water) was calculated. The average ouput of water to air in the years 2015-2019 was 3620444 m3 per year. This equals 0.00147 m3/kg chemical produced. For more information on the other water exchanges please consult the respective exchange comment.
  Since this process comprises 4 reactions to produce the final product, the default value was scaled up. To produce 1 kg of output, 2.36 kg of intermediate products are necessary. The value was therefore scaled up with the factor 3.36.
  References:
  Chemiepark GENDORF, Umwelterklärung 2016, https://www.gendorf.de/Nachbarn/Umweltschutz/Industrie%20und%20Nachhaltigkeit
  Chemiepark GENDORF, Umwelterklärung 2017, https://www.gendorf.de/Nachbarn/Umweltschutz/Industrie%20und%20Nachhaltigkeit
  Chemiepark GENDORF, Umwelterklärung 2020, https://www.gendorf.de/Nachbarn/Umweltschutz/Industrie%20und%20Nachhaltigkeit
- Ammonium [water, unspecified]: 0.00431384 kg; lognormal variance with pedigree 0.0494, pedigree (2,5,2,1,2)
  (same comment as for Acetone)
- BOD5, Biological Oxygen Demand [water, unspecified]: 0.0170118 kg; lognormal variance with pedigree 0.0494, pedigree (2,5,2,1,2)
  Calculated value. The BOD, COD, TOC and BOD5 are calculated based on the amount and type of emissions released to water in the same activity.
- COD, Chemical Oxygen Demand [water, unspecified]: 0.0170118 kg; lognormal variance with pedigree 0.0494, pedigree (2,5,2,1,2)
  (same comment as for BOD5, Biological Oxygen Demand)
- Chloride [water, unspecified]: 0.669966 kg; lognormal variance with pedigree 0.0494, pedigree (2,5,2,1,2)
  Calculated losses, based on the boiling point of a chemical, to water or to air. In addition, unreacted chemicals are assumed to go to wastewater treatment, which has a conversion rate in biological treatment of 95% of carbon into carbon dioxide. The remaining 5% are released as emissions to water.
  This value includes as well emissions from acid neutralisation.
- DOC, Dissolved Organic Carbon [water, unspecified]: 0.00501027 kg; lognormal variance with pedigree 0.0494, pedigree (2,5,2,1,2)
  (same comment as for BOD5, Biological Oxygen Demand)
- Sodium I [water, unspecified]: 0.413692 kg; lognormal variance with pedigree 0.0494, pedigree (2,5,2,1,2)
  (same comment as for Chloride)
- TOC, Total Organic Carbon [water, unspecified]: 0.00501027 kg; lognormal variance with pedigree 0.0494, pedigree (2,5,2,1,2)
  (same comment as for BOD5, Biological Oxygen Demand)
- Water [water, unspecified]: 0.0505344 m3; lognormal variance with pedigree 0.0894, pedigree (2,5,2,4,4)
  Calculated based on literature data published by the GENDORF Chemical Park. The factory produced an average of 2462760 tonnes of chemical substances (including intermediates) per year in the years 2015-2019. The amount of water released back to the environment consists of the sum of the amount of process water treated in the internal WWTP that is then released back to the environment and the amount of cooling water released back to the environment. The average ouput of the internal WWTP in the years 2015-2019 was 2628800 m3 and that of cooling water released back to the environment was 34408800 m3. This gives a yearly average of 37037600 m3 emissions of water to water. This equals 0.01504 m3/kg chemical produced.
  Since this process comprises 4 reactions to produce the final product, the default value was scaled up. To produce 1 kg of output, 2.36 kg of intermediate products are necessary. The value was therefore scaled up with the factor 3.36.
  This value includes as well process emissions.
  References:
  Chemiepark GENDORF, Umwelterklärung 2016, https://www.gendorf.de/Nachbarn/Umweltschutz/Industrie%20und%20Nachhaltigkeit
  Chemiepark GENDORF, Umwelterklärung 2017, https://www.gendorf.de/Nachbarn/Umweltschutz/Industrie%20und%20Nachhaltigkeit
  Chemiepark GENDORF, Umwelterklärung 2020, https://www.gendorf.de/Nachbarn/Umweltschutz/Industrie%20und%20Nachhaltigkeit

## Sampling procedure
Literature data and stoichiometric calculation. This inventory is partially based on a generic model of the production of chemicals. The data generated by this model have been improved with compound-specific data when available.
The model of the production of chemicals is using specific industry or literature data wherever possible and more generic data on chemical production processes to fill compound-specific data gaps when necessary. The basic principles of the model have been published in literature (Hischier, 2005). The model has been updated and extended with newly available data from the chemical industry.
In the model, unreacted fractions are treated in a waste treatment process, and emissions reported are after a waste treatment process that is included in the scope of this dataset. For volatile reactants, a small level of evaporation is assumed. Solvents and catalysts are mostly recycled in closed-loop systems within the scope of the dataset and reported flows are for losses from this system.
The main source of information for the values for heat, electricity, water (process and cooling), nitrogen, chemical factory is industry data from the GENDORF Chemical Park. The values are a 5-year average of data from 2015 to 2019 published by the GENDORF Chemical Park, which is based in Germany and produced an average of 2462760 tonnes of chemical substances in the years 2015-2019.

Reference(s):
Hischier, R. (2005) Establishing Life Cycle Inventories of Chemicals Based on Differing Data Availability (9 pp). The International Journal of Life Cycle Assessment, Volume 10, Issue 1, pp 59–67. 10.1065/lca2004.10.181.7
Chemiepark GENDORF, Umwelterklärung 2016, https://www.gendorf.de/Nachbarn/Umweltschutz/Industrie%20und%20Nachhaltigkeit
Chemiepark GENDORF, Umwelterklärung 2017, https://www.gendorf.de/Nachbarn/Umweltschutz/Industrie%20und%20Nachhaltigkeit
Chemiepark GENDORF, Umwelterklärung 2020, https://www.gendorf.de/Nachbarn/Umweltschutz/Industrie%20und%20Nachhaltigkeit
Six C., Richter F., (2005). Isocyantes, Organic, Ullmanns Encyclopedia of Industrial Chemistry.
Hazardous Substances Data Bank (HSDB): Isophorondiisocyanate (retrieved 11-2020).
US Environmental Protection Agency (US EPA):Isophorondiisocyanate (retrieved 11-2020).
Eller K., Henkes E., Rossbacher R., Hoke H., (2012). Amines, Aliphatic, Ullmann's Encyclopedia of Industrial Chemistry.
