# basic oxygen furnace slag to market for basic oxygen furnace slag, for recovery

Dataset: EcoSpold 2, unit process
Geography: RoW
Time period: 2020-01-01 to 2025-12-31
Technology level: current
Classification: ISIC rev.4 ecoinvent: 3821:Treatment and disposal of non-hazardous waste
Scenario: Business-as-Usual
System model: Allocation at the point of substitution
Generated by: Avraam Symeonidis
Database: ecoinvent
isCopyrightProtected: true

## General comment
This is a renaming activity. Its purpose is to link 'basic oxygen furnace slag' to the 'market for basic oxygen furnace slag, for recovery'. This represents the share of basic oxygen furnace slag that is recovered for use via internal (in iron and steelmaking) or external routes (e.g. cement making).Through this renaming, the by-product classification of the basic oxygen furnace slag is changed from 'waste' to 'recyclable material'.

## Included activities start
Activity starts with the reception of 'basic oxygen furnace slag'.

## Included activities end
Activity ends with the 'basic oxygen furnace slag, for recovery' being ready for transportation.

## Reference product
- basic oxygen furnace slag, for recovery: 1 kg; name BP; By-product classification Recyclable; CPC 39310: Slag, dross, scalings and other waste from the manufacture of iron or steel
  production volume 7.12984e10 kg
    Calculated based on the production volume of the reference product.
  property aluminium content 0.0113568
    The value of 'aluminium content' is documented in Turner & Symeonidis, 2020. Reference: Turner David & Symeonidis Avraam, 2020, Life cycle inventories of the treatment of iron and steelmaking by-products, ecoinvent association, Zürich, Switzerland
  property antimony content 3.31658e-6
    The value of 'antimony content' is documented in Turner & Symeonidis, 2020. Reference: Turner David & Symeonidis Avraam, 2020, Life cycle inventories of the treatment of iron and steelmaking by-products, ecoinvent association, Zürich, Switzerland
  property arsenic content 1.90955e-6
    The value of 'arsenic content' is documented in Turner & Symeonidis, 2020. Reference: Turner David & Symeonidis Avraam, 2020, Life cycle inventories of the treatment of iron and steelmaking by-products, ecoinvent association, Zürich, Switzerland
  property barium content 7.53769e-5
    The value of 'barium content' is documented in Turner & Symeonidis, 2020. Reference: Turner David & Symeonidis Avraam, 2020, Life cycle inventories of the treatment of iron and steelmaking by-products, ecoinvent association, Zürich, Switzerland
  property beryllium content 5.02513e-7
    The value of 'beryllium content' is documented in Turner & Symeonidis, 2020. Reference: Turner David & Symeonidis Avraam, 2020, Life cycle inventories of the treatment of iron and steelmaking by-products, ecoinvent association, Zürich, Switzerland
  property cadmium content 2.51256e-6
    The value of 'cadmium content' is documented in Turner & Symeonidis, 2020. Reference: Turner David & Symeonidis Avraam, 2020, Life cycle inventories of the treatment of iron and steelmaking by-products, ecoinvent association, Zürich, Switzerland
  property calcium content 0.328643
    The value of 'calcium content' is documented in Turner & Symeonidis, 2020. Reference: Turner David & Symeonidis Avraam, 2020, Life cycle inventories of the treatment of iron and steelmaking by-products, ecoinvent association, Zürich, Switzerland
  property carbon content, fossil 0.00356784
    The value of 'carbon content, fossil' is documented in Turner & Symeonidis, 2020. Reference: Turner David & Symeonidis Avraam, 2020, Life cycle inventories of the treatment of iron and steelmaking by-products, ecoinvent association, Zürich, Switzerland
  property carbon content, non-fossil 0
    The value of 'carbon content, non-fossil' is documented in Turner & Symeonidis, 2020. Reference: Turner David & Symeonidis Avraam, 2020, Life cycle inventories of the treatment of iron and steelmaking by-products, ecoinvent association, Zürich, Switzerland
  property chlorine content 0.000100503
    The value of 'chlorine content' is documented in Turner & Symeonidis, 2020. Reference: Turner David & Symeonidis Avraam, 2020, Life cycle inventories of the treatment of iron and steelmaking by-products, ecoinvent association, Zürich, Switzerland
  property chromium content 0.00190955
    The value of 'chromium content' is documented in Turner & Symeonidis, 2020. Reference: Turner David & Symeonidis Avraam, 2020, Life cycle inventories of the treatment of iron and steelmaking by-products, ecoinvent association, Zürich, Switzerland
  property cobalt content 3.8191e-6
    The value of 'cobalt content' is documented in Turner & Symeonidis, 2020. Reference: Turner David & Symeonidis Avraam, 2020, Life cycle inventories of the treatment of iron and steelmaking by-products, ecoinvent association, Zürich, Switzerland
  property copper content 1.90955e-5
    The value of 'copper content' is documented in Turner & Symeonidis, 2020. Reference: Turner David & Symeonidis Avraam, 2020, Life cycle inventories of the treatment of iron and steelmaking by-products, ecoinvent association, Zürich, Switzerland
  property heating value, net 0 MJ
    Non combustible products are assumed to have an LHV equal to zero (0).
  property iron content 0.19196
    The value of 'iron content' is documented in Turner & Symeonidis, 2020. Reference: Turner David & Symeonidis Avraam, 2020, Life cycle inventories of the treatment of iron and steelmaking by-products, ecoinvent association, Zürich, Switzerland
  property lead content 5.02513e-5
    The value of 'lead content' is documented in Turner & Symeonidis, 2020. Reference: Turner David & Symeonidis Avraam, 2020, Life cycle inventories of the treatment of iron and steelmaking by-products, ecoinvent association, Zürich, Switzerland
  property magnesium content 0.0274372
    The value of 'magnesium content' is documented in Turner & Symeonidis, 2020. Reference: Turner David & Symeonidis Avraam, 2020, Life cycle inventories of the treatment of iron and steelmaking by-products, ecoinvent association, Zürich, Switzerland
  property manganese content 0.0284422
    The value of 'manganese content' is documented in Turner & Symeonidis, 2020. Reference: Turner David & Symeonidis Avraam, 2020, Life cycle inventories of the treatment of iron and steelmaking by-products, ecoinvent association, Zürich, Switzerland
  property mercury content 1.00503e-7
    The value of 'mercury content' is documented in Turner & Symeonidis, 2020. Reference: Turner David & Symeonidis Avraam, 2020, Life cycle inventories of the treatment of iron and steelmaking by-products, ecoinvent association, Zürich, Switzerland
  property molybdenum content 2.51256e-5
    The value of 'molybdenum content' is documented in Turner & Symeonidis, 2020. Reference: Turner David & Symeonidis Avraam, 2020, Life cycle inventories of the treatment of iron and steelmaking by-products, ecoinvent association, Zürich, Switzerland
  property nickel content 1.11558e-5
    The value of 'nickel content' is documented in Turner & Symeonidis, 2020. Reference: Turner David & Symeonidis Avraam, 2020, Life cycle inventories of the treatment of iron and steelmaking by-products, ecoinvent association, Zürich, Switzerland
  property oxygen content 0.325896
    The value of 'oxygen content' is documented in Turner & Symeonidis, 2020. Reference: Turner David & Symeonidis Avraam, 2020, Life cycle inventories of the treatment of iron and steelmaking by-products, ecoinvent association, Zürich, Switzerland
  property phosphorus content 0.00687437
    The value of 'phosphorus content' is documented in Turner & Symeonidis, 2020. Reference: Turner David & Symeonidis Avraam, 2020, Life cycle inventories of the treatment of iron and steelmaking by-products, ecoinvent association, Zürich, Switzerland
  property potassium content 0.00227136
    The value of 'potassium content' is documented in Turner & Symeonidis, 2020. Reference: Turner David & Symeonidis Avraam, 2020, Life cycle inventories of the treatment of iron and steelmaking by-products, ecoinvent association, Zürich, Switzerland
  property price 0.00711 EUR2005
    Value is calculated based on the iron content of this material in combination with the price for iron ore concentrate on a per kg iron basis.
  property selenium content 1.50754e-5
    The value of 'selenium content' is documented in Turner & Symeonidis, 2020. Reference: Turner David & Symeonidis Avraam, 2020, Life cycle inventories of the treatment of iron and steelmaking by-products, ecoinvent association, Zürich, Switzerland
  property silicon content 0.0620101
    The value of 'silicon content' is documented in Turner & Symeonidis, 2020. Reference: Turner David & Symeonidis Avraam, 2020, Life cycle inventories of the treatment of iron and steelmaking by-products, ecoinvent association, Zürich, Switzerland
  property silver content 9.14573e-6
    The value of 'silver content' is documented in Turner & Symeonidis, 2020. Reference: Turner David & Symeonidis Avraam, 2020, Life cycle inventories of the treatment of iron and steelmaking by-products, ecoinvent association, Zürich, Switzerland
  property sodium content 0.000524623
    The value of 'sodium content' is documented in Turner & Symeonidis, 2020. Reference: Turner David & Symeonidis Avraam, 2020, Life cycle inventories of the treatment of iron and steelmaking by-products, ecoinvent association, Zürich, Switzerland
  property sulfur content 0.00149749
    The value of 'sulfur content' is documented in Turner & Symeonidis, 2020. Reference: Turner David & Symeonidis Avraam, 2020, Life cycle inventories of the treatment of iron and steelmaking by-products, ecoinvent association, Zürich, Switzerland
  property thallium content 7.23618e-6
    The value of 'thallium content' is documented in Turner & Symeonidis, 2020. Reference: Turner David & Symeonidis Avraam, 2020, Life cycle inventories of the treatment of iron and steelmaking by-products, ecoinvent association, Zürich, Switzerland
  property tin content 6.53266e-6
    The value of 'tin content' is documented in Turner & Symeonidis, 2020. Reference: Turner David & Symeonidis Avraam, 2020, Life cycle inventories of the treatment of iron and steelmaking by-products, ecoinvent association, Zürich, Switzerland
  property titanium content 0.00482412
    The value of 'titanium content' is documented in Turner & Symeonidis, 2020. Reference: Turner David & Symeonidis Avraam, 2020, Life cycle inventories of the treatment of iron and steelmaking by-products, ecoinvent association, Zürich, Switzerland
  property vanadium content 0.00241206
    The value of 'vanadium content' is documented in Turner & Symeonidis, 2020. Reference: Turner David & Symeonidis Avraam, 2020, Life cycle inventories of the treatment of iron and steelmaking by-products, ecoinvent association, Zürich, Switzerland
  property zinc content 4.17085e-5
    The value of 'zinc content' is documented in Turner & Symeonidis, 2020. Reference: Turner David & Symeonidis Avraam, 2020, Life cycle inventories of the treatment of iron and steelmaking by-products, ecoinvent association, Zürich, Switzerland
  properties: carbon allocation 0.00355 kg, carbon content 0.00356784, dry mass 0.995 kg, water content 0.00502513, water in wet mass 0.005 kg, wet mass 1 kg

## Inputs from technosphere
- aluminium, wrought alloy: 3.57916e-7 kg
- argon, liquid: 4.76531e-7 kg
- basic oxygen furnace dust: -0.000113261, -0.000177727 kg (2 suppliers, which the file names only by identifier); sum of these -0.000290987 kg
- basic oxygen furnace secondary metallurgy slag: -4.51096e-6 kg
- basic oxygen furnace slag: -0.00163308 kg
- basic oxygen furnace sludge: -4.51096e-6 kg
- basic oxygen furnace waste: -1.36511e-5 kg
- blast furnace gas: -0.000123865 MJ
- blast oxygen furnace converter: 2.01388e-13 unit
- calcium carbide, technical grade: 7.76914e-7 kg
- chemical factory, organics: 1.20437e-14 unit
- chlorine, for reuse in titanium tetrachloride production: 6.47114e-6, 3.73042e-6 kg (2 suppliers, which the file names only by identifier); sum of these 1.02016e-5 kg
- chlorine, liquid: 1.23093e-5 kg
- coke: 2.83507e-6 MJ
- compressed air, 600 kPa gauge: 0.000216283 m3
- copper, cathode: 3.25378e-9 kg
- diesel: 8.63833e-9, 1.49774e-10, 3.06036e-11, 2.11733e-11, 2.98484e-9, 7.20025e-12 kg (6 suppliers, which the file names only by identifier); sum of these 1.18319e-8 kg
- dolomite: 7.08373e-5 kg
- electricity, medium voltage: 1.0464e-7, 1.4129e-7, 2.03202e-7, 4.24169e-8, 9.56968e-6, 0.000171748, 1.34183e-7, 5.02472e-8, 6.34077e-7, 5.35911e-5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 kWh (46 suppliers, which the file names only by identifier); sum of these 0.000776777 kWh
- electrode, negative, Ni: 2.11496e-8 kg
- ferromanganese, high-coal, 74.5% Mn: 0.000100785 kg
- ferronickel: 4.94852e-5 kg
- ferrosilicon: 3.10292e-8 kg
- heat, district or industrial, natural gas: 2.80492e-5 MJ
- heat, district or industrial, other than natural gas: 0.00111155, 1.66054e-5 MJ (2 suppliers, which the file names only by identifier); sum of these 0.00112815 MJ
- inert waste, for final disposal: -8.48331e-6 kg
- iron ore concentrate: 9.34128e-6 kg
- iron scrap, sorted, pressed: 0.00346114 kg
- lime: 9.3768e-6 kg
- liquefied petroleum gas: 7.13069e-10, 4.98237e-11, 3.15407e-8, 7.42508e-11, 2.2385e-10, 1.05996e-8 kg (6 suppliers, which the file names only by identifier); sum of these 4.32013e-8 kg
- manganese: 8.28235e-8 kg
- mill scale: -9.9427e-7 kg
- molybdenite: 6.55943e-7 kg
- natural gas, high pressure: 1.48553e-7, 6.27047e-8, 3.59127e-7, 1.06575e-7, 6.02905e-6, 6.16216e-7, 6.72651e-8, 1.9849e-9, 2.38848e-7, 2.50819e-7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 m3 (24 suppliers, which the file names only by identifier); sum of these 1.80286e-5 m3
- nickel, class 1: 2.37822e-9 kg
- nitrogen, liquid: 6.6244e-6 kg
- oxygen, liquid: 0.0011813 kg
- petroleum coke: 4.94653e-6 kg
- pig iron: 0.000109167, 0.01297 kg (2 suppliers, which the file names only by identifier); sum of these 0.0130791 kg
- propane: 5.10252e-8 kg
- quicklime, in pieces, loose: 0.00067234 kg
- rutile, 95% titanium dioxide: 4.87921e-6 kg
- sodium hydroxide, without water, in 50% solution state: 3.43446e-5 kg
- sponge iron: 8.58279e-7, 2.32155e-6 kg (2 suppliers, which the file names only by identifier); sum of these 3.17983e-6 kg
- steam, in chemical industry: 1.49378e-6 kg
- tap water: 3.34328e-6 kg
- titania slag, 94% titanium dioxide: 8.55398e-6 kg
- wastewater from pig iron production: -2.01233e-5 m3
- wastewater, average: -7.81775e-11, -8.15621e-8 m3 (2 suppliers, which the file names only by identifier); sum of these -8.16403e-8 m3

## Inputs from nature
- Water, cooling, unspecified natural origin [natural resource, in water]: 8.66171e-5 m3
- Water, unspecified natural origin [natural resource, in water]: 1.0205e-7 m3

## Emissions to nature
- Carbon dioxide, fossil [air, non-urban air or from high stacks]: 3.49299e-6 kg
- Carbon dioxide, fossil [air, unspecified]: 0.000948578 kg
- Carbon monoxide, fossil [air, non-urban air or from high stacks]: 4.44627e-6 kg
- Carbon monoxide, fossil [air, unspecified]: 2.5737e-5 kg
- Chromium III [air, unspecified]: 4.30673e-10 kg
- Copper ion [air, unspecified]: 2.08248e-9 kg
- Dioxins, measured as 2,3,7,8-tetrachlorodibenzo-p-dioxin [air, unspecified]: 9.56723e-16 kg
- Heat, waste [air, unspecified]: 0.00306973 MJ
- Iron ion [air, unspecified]: 6.17107e-7 kg
- Lead II [air, unspecified]: 6.17669e-9 kg
- Manganese II [air, unspecified]: 1.03245e-8 kg
- Nitrogen oxides [air, unspecified]: 3.19827e-7 kg
- PAH, polycyclic aromatic hydrocarbons [air, unspecified]: 1.49978e-10 kg
- Particulate Matter, < 2.5 um [air, unspecified]: 6.76129e-7 kg
- Water [air, non-urban air or from high stacks]: 2.04101e-8 m3
- Water [air, unspecified]: 9.17549e-5 m3
