# suction, shavings, hardwood

Dataset: EcoSpold 2, unit process
Geography: CA-QC
Time period: 2012-01-01 to 2022-12-31
Technology level: current
Classification: ISIC rev.4 ecoinvent: 1610:Sawmilling and planing of wood
Tags: recontextualization
Scenario: Business-as-Usual
System model: Allocation at the point of substitution
Generated by: Hugues Imbeault-Tétreault
Database: ecoinvent
isCopyrightProtected: true

## General comment
This data represents the service of collecting shavings from the planing of hardwood, expressed per kg dry mass and transporting it to its silo via aspiration.

## Included activities start
The activity starts with the shavings at the planing machine.

## Included activities end
This activity ends with the shavings collected at a silo at the sawmill site. The dataset does not include direct wood dust emissions. The infrasturcture for the pipes and pumps as well as for the silo are assumed be part of the infrastructure DS for the sawmill.

## Geography
The exchanges of this child dataset are identical to the GLO dataset. This dataset was created to enable linking to regional markets (e.g. for electricity). Data quality indicators were adjusted accordingly

## Reference product
- shavings, hardwood, measured as dry mass: 1 kg; source BFS 2013; By-product classification allocatable product; CPC 39283: Non-agglomerated wood waste and scrap; lognormal variance with pedigree 0.216, pedigree (5,5,5,5,5)
  shavings recollected from the planing process where they are generated as loose shavings.
  production volume 7.22602e7 kg
    Calculated from production volume of reference product using the relative outputs.
  property heating value, net 13.38 MJ
    LHV is calculated based on the Carbon content of the product. More details can be found on the respective documentation.
  property price 0.113 EUR2005
    Calculated based on data from FAOSTAT (accessed 20140429). The price is calculated by using data on total world import quantity (m3) and import value (1000 USD), year 2005. 40461924 m3 of Chips and Particles was imported in the world in 2005. The import value was 3022227000 USD. The calculated price is thus (3022227000/40461924=74.7*0.8=) 62.2 Euro/m3. It is estimated, that the chips and particles are half hardwood (of density 650 kg/m3) and half softwood (of density 450 kg/m3), thus the remaining mixture has a density of 550 kg/m3. The recalculated price is (1/550*62.2=) 0.11 Euro/kg. Using the same approach the calculated price for 2010 was 0.123 Euro/kg.
  properties: carbon allocation 0.494 kg, carbon content 0.494, carbon content, fossil 0, carbon content, non-fossil 0.494, dry mass 1 kg, water content 0.1, water in wet mass 0.1 kg, wet mass 1.1 kg

## Inputs from technosphere
- electricity, medium voltage: 0.00811104 kWh
- planing mill: 3.0428e-10 unit
- sawnwood, beam, hardwood, raw, dried (u=10%): 2.38886e-5 m3
- sawnwood, beam, hardwood, raw, dried (u=20%): 4.96371e-6, 1.98548e-5 m3 (2 suppliers, which the file names only by identifier); sum of these 2.48185e-5 m3
- sawnwood, board, hardwood, raw, dried (u=10%): 8.58207e-5 m3
- sawnwood, board, hardwood, raw, dried (u=20%): 1.78403e-5, 7.13612e-5 m3 (2 suppliers, which the file names only by identifier); sum of these 8.92015e-5 m3
- sawnwood, lath, hardwood, raw, dried (u=10%): 0.000118241 m3
- sawnwood, lath, hardwood, raw, dried (u=20%): 2.45893e-5, 9.83573e-5 m3 (2 suppliers, which the file names only by identifier); sum of these 0.000122947 m3
- shavings, hardwood, loose, measured as dry mass: -0.0311374 kg

## Sampling procedure
complementary literature and sampling from sawmills

## Extrapolations
Extrapolated from Swiss data. The exchanges of this child dataset are identical to the GLO dataset. This dataset was created to enable linking to regional markets (e.g. for electricity). Data quality indicators were adjusted accordingly.
