# treatment of sewage sludge, 70% water, WWT, WW from LCD backlight production, municipal incineration FAE

Dataset: EcoSpold 2, unit process
Geography: CH
Time period: 2006-01-01 to 2022-12-31
Technology level: current
Classification: ISIC rev.4 ecoinvent: 3821:Treatment and disposal of non-hazardous waste
Scenario: Business-as-Usual
System model: Allocation at the point of substitution
Generated by: Nikolia Stoikou
Database: ecoinvent
isCopyrightProtected: true

## General comment
The process represents the treatment of a waste (sewage sludge) that is exclusively produced from another waste treatment. Municipal incineration is the controlled combustion of a waste. Sewage sludge is generated in the wastewater treatment of 'wastewater from LCD backlight production'. Recommended use of this dataset: to be used within the specific chain of treatments for 'wastewater from LCD backlight production'. Share of biogenic carbon in the sludge: 0%. "LCD" stands for "Liquid-crystal display".

## Included activities start
The activity starts with the waste being available at the gate of the treatment facility. Collection and transportation of the waste to the treatment plant is not included.

## Included activities end
The activity ends with the waste being treated and waste-specific emissions from the incineration process are released to the environment (air and water).

## Geography
Modelling parameters affecting the treatment technology are specific to this geography and to the technology mix encountered in Switzerland in 2012.

## Technology
The waste is treated in the incineration plant with flue gas cleaning. Incineration is the controlled combustion of a waste. Auxiliary material consumption for this step of air pollution control (APC) are included in the process. Infrastructure is also included in the process. Air polution control includes, electrostatic precipitator for fly ash (ESP), wet flue gas scrubber and 25% SNCR , 42.77% SCR-high dust , 32.68% SCR-low dust -DeNOx facilities and 0% without DeNOx (weighted according to mass of burnt waste). Efficiency of iron scrap separation from slag : 58%. Efficiency of aluminium scrap separation from slag : 31%. Efficiency of copper scrap separation from slag : 31%. The technology mix for this dataset includes a filter ash treatment (FLUWA) of a share of 46.22%. Gross electric efficiency technology mix 15.84% and Gross thermal efficiency technology mix 28.51%

## Reference product
- heat, for reuse in municipal waste incineration only: 1 MJ; By-product classification allocatable product; CPC 17300: Steam and hot water; lognormal variance with pedigree 0.046332, pedigree (1,1,1,1,1)
  net useful heat generated from this waste and used in internal MSWI plant energy redistribution.
  Uncertainty: uncertainty is calculated from uncertainties in waste composition and uncertainties in energy efficiency and the uncertainty in internal energy demand
  production volume 0.00107157 MJ
    Calculated from the production volume of the reference product in proportion to the respective output amounts.
  property price 0.0106 EUR2005
    Average European district heat price from Ecoheatcool and Euroheat 2005-2006, Ecoheat Work package 1: The European heat market. Final report. 10.6 EUR/GJ i s the price of district heat. http://www.solarthermalworld.org/files/Ecoheatcool%20WP1%20Web.pdf?download
  properties: carbon allocation 0 kg, carbon content 0

## Inputs from technosphere
- aluminium, wrought alloy: 7.81265e-6 kg
- argon, liquid: 1.43244e-9, 6.79996e-9 kg (2 suppliers, which the file names only by identifier); sum of these 8.23239e-9 kg
- cable, ribbon cable, 20-pin, with plugs: 7.9992e-7 kg
- chemical, inorganic: 4.88597e-8 kg
- chemical, organic: 6.52538e-8 kg
- copper, cathode: 1.5882e-7 kg
- diethyl ether, without water, in 99.95% solution state: 1.76473e-8, 3.9951e-9 kg (2 suppliers, which the file names only by identifier); sum of these 2.16424e-8 kg
- electricity, medium voltage: 0.000288928 kWh
- ethanol, without water, in 99.7% solution state, from ethylene: 3.34646e-9, 7.45152e-9 kg (2 suppliers, which the file names only by identifier); sum of these 1.0798e-8 kg
- glass tube, borosilicate: 9.6551e-6 kg
- hazardous waste, for incineration: -1.06187e-6, -5.10651e-7, -1.33481e-8 kg (3 suppliers, which the file names only by identifier); sum of these -1.58587e-6 kg
- hazardous waste, for underground deposit: -5.89394e-11, -3.79643e-12 kg (2 suppliers, which the file names only by identifier); sum of these -6.27358e-11 kg
- heat, district or industrial, natural gas: 8.83045e-8 MJ
- inert waste, for final disposal: -2.29692e-12, -3.52815e-10 kg (2 suppliers, which the file names only by identifier); sum of these -3.55112e-10 kg
- krypton, gaseous: 1.47158e-8 kg
- lead: 2.48842e-7 kg
- lead in car shredder residue: -2.83571e-13, -1.87701e-11 kg (2 suppliers, which the file names only by identifier); sum of these -1.90537e-11 kg
- mercury: 9.30531e-10 kg
- polycarbonate: 2.65863e-5 kg
- polyethylene terephthalate, granulate, amorphous: 6.39018e-6 kg
- polymethyl methacrylate, sheet: 0.000176543 kg
- printed wiring board mounting facility: 4.89939e-11 unit
- spent activated carbon with mercury: -2.15024e-13 kg
- steel, chromium steel 18/8, hot rolled: 5.87692e-6 kg
- synthetic rubber: 1.40163e-7 kg
- waste paperboard: -2.82996e-11, -1.84574e-11, -3.44266e-9, -1.85322e-10, -4.55126e-10, -9.97103e-12, -1.02258e-10, -2.47454e-12 kg (8 suppliers, which the file names only by identifier); sum of these -4.24457e-9 kg
- waste plastic, industrial electronics: -5.32636e-9, -3.52565e-7 kg (2 suppliers, which the file names only by identifier); sum of these -3.57891e-7 kg
- waste polyethylene: -2.58753e-8, -6.78098e-10, -1.81141e-7, -1.72889e-9, -1.30753e-10, -7.14092e-10, -2.88485e-10, -2.24257e-8 kg (8 suppliers, which the file names only by identifier); sum of these -2.32983e-7 kg
- waste polypropylene: -7.85473e-10, -6.10595e-8, -3.56008e-10, -4.93203e-7, -1.9443e-9, -4.70733e-9, -1.84629e-9, -7.0452e-8 kg (8 suppliers, which the file names only by identifier); sum of these -6.34354e-7 kg
- wastewater from liquid crystal display backlight production: -1.07748e-7, -2.22811e-5 m3 (2 suppliers, which the file names only by identifier); sum of these -2.23888e-5 m3

## Inputs from nature
- Water, unspecified natural origin [natural resource, in water]: 4.47776e-5 m3

## Emissions to nature
- Diethyl ether [air, urban air close to ground]: 2.15957e-8 kg
- Ethanol [air, urban air close to ground]: 1.0798e-8 kg
- Nitrogen oxides [air, urban air close to ground]: 6.80992e-6 kg
- Water [air, unspecified]: 2.73144e-6 m3
- Water [water, unspecified]: 1.96574e-5 m3

## Extrapolations
Modelling parameters are based on an average municipal solid waste incineration plant in Switzerland for the year of 2010 (grate incinerators).
