# treatment of used toner module, laser printer, colour, recycling

Dataset: EcoSpold 2, unit process
Geography: RER
Time period: 2002-01-01 to 2022-12-31
Technology level: current
Classification: ISIC rev.4 ecoinvent: 2817:Manufacture of office machinery and equipment (except computers and periphe
Classification: EcoSpold01Categories: electronics/module
Synonyms: OEM cartridge; toner cartridge; CMYK
Scenario: Business-as-Usual
System model: Allocation at the point of substitution
Generated by: Tereza Levova
Published in: Hischier R. 2007
Database: ecoinvent
isCopyrightProtected: false

## General comment
This dataset represents 1 unit of used toner cartridge,colour. It relates to the mass of coloured toner printed actually printed on paper. It assumes two use cycles, i.e. one as a OEM cartridge and a subsequent as remanufactured virgin core. It is to be used to reflect coloured toner use in colour laser printer systems for cartridges with a capacity of 5000 sheets and a weight of env. 1 kg including toner.
[This dataset is meant to replace the following datasets:
- treatment of used toner cartridge, colour, remanufacturing for laser printer, including 50% new toner modules, RER, 2002 - 2005]

## Included activities start
From reception of the toner at the disposal

## Included activities end
Includes the initial OEM cartridge, the remanufacturing and disposal of spare parts and spare toner and the final disposal of the cartridge. No emissions due to printing contained.

## Geography
European Electricity mix and material processing data for supplier outside Europe.

## Technology
Replacement of spare parts, assembly of semifinished components. After fulfilling the first use cycle toner cartridges are returned to remanufacturing sites, where they are refilled and refurbished. Some of the empty cartridges (“empties” or “core”) are sorted out and disposed. While this can be perceived as average failure rate, the cartridge’s life cycle also can be thought of as a number of subsequent refurbishment cycles. Some of the empty cartridges (“empties” or “core”) are sorted out and disposed. While this can be perceived as average failure rate, the cartridge’s life cycle also can be thought of as a number of subsequent refurbishment cycles. Cartridges are remanufactured by specialised companies. They reuse the cores of original equip-ment manufacturers (OEMs) and refurbish it with replacement parts from different suppliers and refill it with toner.
The first step in any remanufacturing process is obtaining the empty cartridge (“core”). At least 70 percent of first remanufacturing cycle cores is abandoned. Next, the remanufacturer must disassemble the cartridge. Disassembling a HP 96A is a multistep process that requires the removal of sensitive components such as the OPC drum. After completing the desired degree of disassembly, components can be checked to determine their suitability for reuse. The com-ponent performance in a second (and additional) cycle is again impaired and the failure rate rises. Not all of the toner powder is fixed on the paper, the rest is collected returned to remanufacturing together with the cartridge where it is prepared, sieved and reused.

## Reference product
- toner module, laser printer, colour: 1 unit; name toner_module_byP; By-product classification allocatable product; CPC 44922: Parts for the goods of subclasses 44914, 44917 and 45150; lognormal variance with pedigree 0.0074, pedigree (1,3,2,1,2)
  Calculated value based on literature. The weight of one toner module, laser printer, black/white is assumed to be 0.88 kg (based on ecoinvent v2 report no. 18 II., pg. 200). Further it is assumed that the toner module is recycled (re-manufactured) twice.
  production volume 3.06167e7 unit
    Calculated from production volume of reference product using the relative outputs.
  property carbon content, fossil 0.549659
    C content was calculated as the addition of C content in the components
  property carbon content, non-fossil 0
    C content was calculated as the addition of C content in the components
  property price 121 EUR2005
    Temporary price data. Calculated as 90% of purchasers price based on: Calculated for 5000 pages printed at 0.045 USD/page (source for ink-per-page-price is a study by QualityLogic: http://www.qualitylogic.com/tuneup/uploads/docfiles/QualityLogic-Cost-of-Ink-Per-Page-Analysis-United-States-Januar-2008.pdf)
  properties: carbon allocation 0.626612 kg, carbon content 0.549659, dry mass 1.14 kg, water content 0, water in wet mass 0 kg, wet mass 1.14 kg

## Inputs from technosphere
- electricity, low voltage: 0.0965108, 0.0167457, 0.191262, 1.83727, 0.0327742, 0.0479177, 0.00596013, 0.0177449, 0.940594, 0.582263 kWh (10 suppliers, which the file names only by identifier); sum of these 3.76905 kWh
- paper, woodcontaining, lightweight coated: 3.83335, 11.2428 kg (2 suppliers, which the file names only by identifier); sum of these 15.0762 kg
- printer, laser, colour: 0.00314087 unit
- toner module, laser printer, colour: 0.603047 unit
- used toner module, laser printer, colour: -0.530682 kg

## Emissions to nature
- Benzene [air, unspecified]: 2.78336e-6 kg

## Sampling procedure
Literature

## Extrapolations
see Geography and Technology This dataset has been copied from an original dataset covering the geography RER. The uncertainty has been adjusted accordingly.
