# building construction, hall, wood construction

Dataset: EcoSpold 2, unit process
Geography: CH
Time period: 2000-01-01 to 2022-12-31
Technology level: current
Classification: EcoSpold01Categories: construction processes/buildings
Classification: ISIC rev.4 ecoinvent: 4100:Construction of buildings
Tags: ConvertedDataset
Scenario: Business-as-Usual
System model: Allocation at the point of substitution
Generated by: Daniel Kellenberger (obsolete)
Published in: Kellenberger D. 2007
Database: ecoinvent
isCopyrightProtected: true

## General comment
The module is based on a fictitious building hall with size: length 50 m, width 30 m, height 7 m, daylight opening 110 m2. The service life is assumed to be 50 years. This module should not be used if its relative importance would be high in a certain environmental inventory.
[This dataset was already contained in the ecoinvent database version 2. It was not individually updated during the transfer to ecoinvent version 3. Life Cycle Impact Assessment results may still have changed, as they are affected by changes in the supply chain, i.e. in other datasets. This dataset was generated following the ecoinvent quality guidelines for version 2. It may have been subject to central changes described in the ecoinvent version 3 change report (http://www.ecoinvent.org/database/ecoinvent-version-3/reports-of-changes/), and the results of the central updates were reviewed extensively. The changes added e.g. consistent water flows and other information throughout the database. The documentation of this dataset can be found in the ecoinvent reports of version 2, which are still available via the ecoinvent website. The change report linked above covers all central changes that were made during the conversion process.]

## Included activities end
Includes the most important materials used and their disposal, the transportation of the parts to the building site and to the final disposal at the end of life. Also included is the requirement of electricity for construction, maintenance and demolition. Operation is not included.

## Geography
Certain elementary flows or intermediate product flows are RER or GLO modules

## Technology
Example representing current wooden industrial structures in Switzerland

## Reference product
- building, hall, wood construction: 1 m2; By-product classification allocatable product; CPC 531: Buildings
  EcoSpold01Location=CH
  production volume 0.0336675 m2
    This is a placeholder value that does not reflect real-world production volumes. This dataset does not currently require a real-world production volume to work in the database framework, and no actual data were collected yet. This has no negative effect on the results of the ecoinvent database. The placeholder value of this activity was scaled according to the nominal GDP of 2005 (source: United Nations, http://data.un.org/Glossary.aspx?q=GDP+%28current+US%24%29, accessed 20130726) to reflect an appropriate share of the global production volume, which is also a placeholder value.
  property price 151.877 EUR2005
    Calculated based on inputs: The price of the product has been calculated as a sum of the values of the material and energy inputs for this product. This value is therefore a rough estimation. It may underestimate the real price since there are additional expenses when producing any product. These expences can include for example labour costs, treatment of waste materials and profit for the producer. Please consider carefully whether this level of data quality is acceptable for your application.
  properties: carbon allocation 0 kg, carbon content 0

## Inputs from technosphere
- aluminium, wrought alloy: 2.78023 kg; lognormal variance with pedigree 0.286, pedigree (4,5,5,1,5)
  EcoSpold01Location=RER
  Uncertainty: ;
  properties: dry mass 1 kg, wet mass 1 kg
- concrete, 30MPa: 0.278023 m3; lognormal variance with pedigree 0.286, pedigree (4,5,5,1,5)
  EcoSpold01Location=CH
  properties: dry mass 2205 kg, water content 0.0816327, wet mass 2385 kg
- diesel, burned in building machine: 220.565 MJ; lognormal variance with pedigree 0.286, pedigree (4,5,5,1,5)
  EcoSpold01Location=GLO
  properties: heating value, net 1 MJ
- electricity, medium voltage: 9.73082 kWh; lognormal variance with pedigree 0.286, pedigree (4,5,5,1,5)
  EcoSpold01Location=CH
- flat glass, uncoated: 4.17035 kg; lognormal variance with pedigree 0.286, pedigree (4,5,5,1,5)
  EcoSpold01Location=RER
  properties: dry mass 1 kg, wet mass 1 kg
- glued laminated timber, MUF-glue: 0.0231686 m3; lognormal variance with pedigree 0.286, pedigree (4,5,5,1,5)
  The split between PUR-glue and MUF-glue glued laminated timber is made based on the Swiss relative production volumes for the products.
  EcoSpold01Location=RER
  properties: carbon content, fossil 0.01638, carbon content, non-fossil 0.442689, dry mass 403.64 kg, heating value, net 5517.96 MJ, price 298 EUR2005, water content 0.0975126, wet mass 443 kg
- glued laminated timber, PUR-glue: 0.0231686 m3; lognormal variance with pedigree 0.286, pedigree (4,5,5,1,5)
  The split between PUR-glue and MUF-glue glued laminated timber is made based on the Swiss relative production volumes for the products.
  properties: carbon content, fossil 0.00801, carbon content, non-fossil 0.446904, dry mass 399.46 kg, heating value, net 5409.08 MJ, price 298 EUR2005, water content 0.0989836, wet mass 439 kg
- particleboard, uncoated: 0.0278023 m3; lognormal variance with pedigree 0.286, pedigree (4,5,5,1,5)
  EcoSpold01Location=RER
  properties: carbon content, fossil 0.045339, carbon content, non-fossil 0.4416, dry mass 599.3 kg, heating value, net 8749.71 MJ, water content 0.0629067, wet mass 637 kg
- polystyrene foam slab: 5.00442 kg; lognormal variance with pedigree 0.286, pedigree (4,5,5,1,5)
  EcoSpold01Location=RER
  properties: carbon content, fossil 0.859091, dry mass 1 kg, heating value, net 38.67 MJ, wet mass 1 kg
  note on carbon content, fossil: XPS consists in 91% of polystyrene, 7% of blowing agent and the re-maining 2% are flame retardants (bromine compounds) and other additives (ecoinvent v2.2 report 7, part XIV, pg69). The chemical formula of polystyrene is (C8H8)n. Here, the blowing agent is CO2.
- reinforcing steel: 12.233 kg; lognormal variance with pedigree 0.286, pedigree (4,5,5,1,5)
  EcoSpold01Location=RER
  properties: carbon content, fossil 0.004, dry mass 1 kg, wet mass 1 kg
- sawnwood, softwood, dried (u=10%), planed: 0.00556047 m3; lognormal variance with pedigree 0.286, pedigree (4,5,5,1,5)
  EcoSpold01Location=RER
  properties: carbon content, non-fossil 0.494, dry mass 450 kg, heating value, net 6625.26 MJ, water content 0.1, wet mass 495 kg
  note on carbon content, non-fossil: C content of dry mass is 0.494 kgC/kg dry wood (ecoinvent v2.2 report 9)
- sawnwood, softwood, raw, dried (u=10%): 0.0973082 m3; lognormal variance with pedigree 0.286, pedigree (4,5,5,1,5)
  EcoSpold01Location=RER
  properties: carbon content, non-fossil 0.494, dry mass 450 kg, heating value, net 7227.56 MJ, water content 0.2, wet mass 540 kg
  note on heating value, net: Assumed equal to "sawnwood, softwood, dried (u=10%), planed".The property is based on a value of 13.38MJ/kg
- sheet rolling, steel: 12.233 kg; lognormal variance with pedigree 0.286, pedigree (4,5,5,1,5)
  activityLink introduced to establish a direct link to the corresponding regional supply of this product
  EcoSpold01Location=RER
- stone wool, packed: 12.233 kg; lognormal variance with pedigree 0.286, pedigree (4,5,5,1,5)
  EcoSpold01Location=CH
  properties: carbon content, fossil 0.015401, dry mass 1 kg, wet mass 1 kg
  note on carbon content, fossil: The chemical composition of the glass fibres used in the rock wool production is similar to the composition of naturally cooled volcano basalt and has a composition listed in Tab. 3.1 and 3.2 in ecoinvent v2.2 report 16, part XIV. Rock wool contains: a minimum of 96% mineral fibres,between 0.5 and 3.0 weight percent of phenolic resin depending on the specific product characteristics, and about 0.2 percent mineral oil (ecoinvent v2.2 report 16, part XIV). An average composition of 1.8% phenolic resin, 0.2% mineral oil, and 98% mineral fibres has been assumed and used to calculate C content of the rock wool
- waste bulk iron, excluding reinforcement: -12.233 kg; lognormal variance with pedigree 0.246, pedigree (4,5,1,1,5)
  EcoSpold01Location=CH
  production volume
    Calculated from the production volume of building, hall, wood construction in proportion to the respective output amounts.
  properties: dry mass 1 kg, wet mass 1 kg
- waste fibreboard: -54.8633 kg; lognormal variance with pedigree 0.246, pedigree (4,5,1,1,5)
  EcoSpold01Location=CH
  production volume
    (same comment as for waste bulk iron, excluding reinforcement)
  properties: carbon content, fossil 0.0731794, carbon content, non-fossil 0.439195, dry mass 0.84245 kg, heating value, net 12.69 MJ, water content 0.187014, wet mass 1 kg
  note on carbon content, fossil: The waste contains 0.925kg untreated wood (Tab A.4 for details) and 0.075kg polyurethane (Tab A.1 for details), (ecoinvent v2.2 report 13_I)
- waste glass sheet: -4.17035 kg; lognormal variance with pedigree 0.246, pedigree (4,5,1,1,5)
  EcoSpold01Location=CH
  production volume
    (same comment as for waste bulk iron, excluding reinforcement)
  properties: dry mass 1 kg, wet mass 1 kg
- waste mineral wool: -12.233 kg; lognormal variance with pedigree 0.246, pedigree (4,5,1,1,5)
  EcoSpold01Location=CH
  production volume
    (same comment as for waste bulk iron, excluding reinforcement)
  properties: dry mass 1 kg, wet mass 1 kg
- waste polystyrene isolation, flame-retardant: -5.00442 kg; lognormal variance with pedigree 0.246, pedigree (4,5,1,1,5)
  EcoSpold01Location=CH
  production volume
    (same comment as for waste bulk iron, excluding reinforcement)
  properties: carbon content, fossil 0.918145, dry mass 0.998012 kg, heating value, net 38.67 MJ, water content 0.00199232, wet mass 1 kg
  note on carbon content, fossil: Polystyrene isolation (EPS) is flame-retarded with hexa-bromo-cyclo-dodecan (C12H18Br6) and contains 0.67 w% bromine (ecoinvent v2.2 report 13_I, pg 39). The rest is polystyrene: (C8H8)n.
- waste reinforced concrete: -695.058 kg; lognormal variance with pedigree 0.246, pedigree (4,5,1,1,5)
  EcoSpold01Location=CH
  production volume
    (same comment as for waste bulk iron, excluding reinforcement)
  properties: dry mass 0.99418 kg, water content 0.00585407, wet mass 1 kg
- waste wood, untreated: -74.0469 kg; lognormal variance with pedigree 0.246, pedigree (4,5,1,1,5)
  EcoSpold01Location=CH
  production volume
    (same comment as for waste bulk iron, excluding reinforcement)
  properties: carbon content, non-fossil 0.48632, dry mass 0.8 kg, heating value, net 13.99 MJ, water content 0.25, wet mass 1 kg
  note on carbon content, non-fossil: Tab A.4, ecoinvent v2.2 report 13_I. C content has been referred to 1 kg DM,
  note on heating value, net: Value taken from the general comment of the treatment dataset.
- zinc coat, coils: 5.53266 m2; lognormal variance with pedigree 0.286, pedigree (4,5,5,1,5)
  (same comment as for sheet rolling, steel)

## Sampling procedure
most data obtained by personal communication

## Extrapolations
See geography

## Review by Roberto Dones 2003-09-15
passed
