# treatment of sewage sludge, 97% water, WWT[U], WW from lorry production, landfarming

Dataset: EcoSpold 2, unit process
Geography: CH
Time period: 2000-01-01 to 2022-12-31
Technology level: current
Classification: ISIC rev.4 ecoinvent: 3821:Treatment and disposal of non-hazardous waste
Scenario: Business-as-Usual
System model: Allocation at the point of substitution
Generated by: Nikolia Stoikou
Database: ecoinvent
isCopyrightProtected: true

## General comment
The process represents the treatment of a waste (sewage sludge) that is exclusively produced from another waste treatment. Recommended use of this dataset: to be used within the specific chain of treatments for 'wastewater from lorry production'. Share of biogenic carbon in the sludge: 0%.

## Included activities start
The activity starts with the waste being available for landfarming. Collection and transportation of the waste to this process is not included.

## Included activities end
The activity ends with the waste being treated and waste-specific emissions from the landfarming process are released to the environment (air, water and soil). The activity is considering local fate of emissions and the initial specific wastewater composition (generating the sewage sludge). Further, it includes provision of fertiliser functions for N, P, K, if present in the sludge.

## Geography
The site has mean annual temperature (MAT) of 9.5 degC, mean annual precipitation (MAP) of 1483.00559816076 mm/year, mean annual actual evaporation (EAT) of 528.63778611689 mm/year. Climate will influence the local fate emissions based on the elemental composition of the sludge as well as water evaporation to air (= consumptive water use).
References: UN data, 2020. Precipitation, Environment Statistics Database, United Nations Statistics Division Available at: http://data.un.org/Data.aspx?q=precipitation&d=ENV&f=variableID%3a6;
World Bank, 2022. Surface area (sq.km), World Bank Group Available at: https://data.worldbank.org/indicator/AG.SRF.TOTL.K2;
MeteoSwiss, 2022. Data on Swiss temperature mean, Federal Department of Home Affairs FDHA. Federal Office of Meteorology and Climatology. Swiss Climate Available at: https://www.MeteoSwiss.admin.ch/home/climate/swiss-climate-in-detail/Swiss-temperature-mean/Data-on-the-Swiss-temperature-mean.html?query=TEMPERATURE+DATA&topic=/content/MeteoSwiss/tags/topics/klima&pageIndex=0&tab=search_tab;
Doka G.,2021. A model for composition-specific life cycle inventories of regionalised wastewater fates, Zurich, Switzerland. http://www.doka.ch/publications.htm

## Technology
Landfarming is the process of spreading a substrate on agricultural soil. Sewage sludge is generated in the wastewater treatment of wastewater from lorry production. Spreading of liquid sewage sludge (97w% water content) on agricultural fields with mobile vacuum tanker.

## Reference product
- organic nitrogen fertiliser, as N: 1 kg; By-product classification allocatable product; CPC 34659: Fertilizers n.e.c.
  gross fertilizer function provided from sewage sludge spreading on agricultural fields.
  production volume 0.000277784 kg
    Calculated in proportion to wastewater reference product.
  property nitrogen content 1
    Nitrogen content (on a dry matter basis) of organic nitrogen fertiliser, as N is calculated from the molecular formula of the substance (Nitrogen).
  property price 0.473 EUR2005
    Set equal to the price of the corresponding inorganic fertiliser
  properties: carbon allocation 0 kg, carbon content 0, carbon content, fossil 0, carbon content, non-fossil 0, dry mass 1 kg, water content 0, water in wet mass 0 kg, wet mass 1 kg

## Inputs from technosphere
- acetic acid, without water, in 98% solution state: 5.074e-7 kg
- acetylene: 9.01167e-6, 4.27795e-5 kg (2 suppliers, which the file names only by identifier); sum of these 5.17912e-5 kg
- alkyd paint, white, without solvent, in 60% solution state: 5.71251e-5, 0.0002516 kg (2 suppliers, which the file names only by identifier); sum of these 0.000308725 kg
- aluminium, cast alloy: 0.00317529 kg
- aluminium, wrought alloy: 0.00112746 kg
- brass: 0.000151538, 2.72206e-6 kg (2 suppliers, which the file names only by identifier); sum of these 0.000154261 kg
- cast iron: 0.0377743 kg
- copper, cathode: 0.000575866 kg
- diesel: 0.0012717, 1.21702e-5 kg (2 suppliers, which the file names only by identifier); sum of these 0.00128387 kg
- diesel, burned in building machine: 0.000154526 MJ
- electricity, medium voltage: 0.644577, 0.000345431 kWh (2 suppliers, which the file names only by identifier); sum of these 0.644922 kWh
- electronics, for control units: 0.00103517 kg
- flat glass, coated: 4.21663e-6 kg
- flat glass, uncoated: 0.000295638, 0.00141452 kg (2 suppliers, which the file names only by identifier); sum of these 0.00171015 kg
- heat, district or industrial, natural gas: 0.00235389, 1.10311 MJ (2 suppliers, which the file names only by identifier); sum of these 1.10546 MJ
- heat, district or industrial, other than natural gas: 6.27241e-5, 0.00655423 MJ (2 suppliers, which the file names only by identifier); sum of these 0.00661695 MJ
- hydrochloric acid, without water, in 30% solution state: 2.7651e-7, 1.1765e-6 kg (2 suppliers, which the file names only by identifier); sum of these 1.45301e-6 kg
- injection moulding: 0.00527674 kg
- lead: 0.00188162 kg
- lime, hydrated, packed: 2.34078e-6, 4.24608e-8 kg (2 suppliers, which the file names only by identifier); sum of these 2.38324e-6 kg
- lubricating oil: 0.000390608, 8.89174e-5 kg (2 suppliers, which the file names only by identifier); sum of these 0.000479526 kg
- nitric acid, without water, in 50% solution state: 1.62276e-8, 2.18287e-7, 2.41117e-8, 5.99614e-8, 7.7978e-8, 2.87304e-8, 9.88139e-8, 2.60506e-8, 2.40225e-8, 1.83072e-7 kg (10 suppliers, which the file names only by identifier); sum of these 7.57256e-7 kg
- oxygen, liquid: 2.67628e-5, 9.75361e-5 kg (2 suppliers, which the file names only by identifier); sum of these 0.000124299 kg
- pig iron: 0.00121321, 0.0113602 kg (2 suppliers, which the file names only by identifier); sum of these 0.0125734 kg
- pitch: 8.53411e-8, 4.0324e-7, 1.29798e-5, 5.75663e-7, 5.08556e-5, 1.98765e-7, 8.99605e-6, 3.4876e-6 kg (8 suppliers, which the file names only by identifier); sum of these 7.7582e-5 kg
- polyethylene, high density, granulate: 0.00177846 kg
- polypropylene, granulate: 0.00605713 kg
- polyurethane, rigid foam: 0.000545383, 0.00110433 kg (2 suppliers, which the file names only by identifier); sum of these 0.00164971 kg
- powder coat, steel: 0.00149498 m2
- propylene glycol, liquid: 0.000112146, 5.77367e-5 kg (2 suppliers, which the file names only by identifier); sum of these 0.000169882 kg
- refrigerant R134a: 1.72107e-8 kg
- refrigeration machine, R134a as refrigerant: 6.85349e-6 unit
- refrigeration machine, carbon dioxide, liquid as refrigerant: 7.61509e-7 unit
- reinforcing steel: 0.0174854 kg
- road vehicle factory: 5.81845e-14, 1.56906e-11 unit (2 suppliers, which the file names only by identifier); sum of these 1.57488e-11 unit
- scrap copper: -5.11331e-6, -0.000108984, -0.000229476 kg (3 suppliers, which the file names only by identifier); sum of these -0.000343574 kg
- scrap lead acid battery: -0.00131549 kg
- scrap steel: -7.8379e-5, -0.192123, -0.0618636 kg (3 suppliers, which the file names only by identifier); sum of these -0.254065 kg
- section bar rolling, steel: 0.000160994, 0.0124124 kg (2 suppliers, which the file names only by identifier); sum of these 0.0125734 kg
- sheet rolling, steel: 4.53367e-5, 0.00318307 kg (2 suppliers, which the file names only by identifier); sum of these 0.00322841 kg
- sodium hydroxide, without water, in 50% solution state: 2.92908e-6 kg
- steel, chromium steel 18/8, hot rolled: 0.0167508 kg
- steel, low-alloyed: 0.187618 kg
- steel, low-alloyed, hot rolled: 0.0498292 kg
- stone wool, packed: 8.05251e-5 kg
- sulfuric acid: 0.00018788, 2.66643e-5 kg (2 suppliers, which the file names only by identifier); sum of these 0.000214544 kg
- synthetic rubber: 0.0140697 kg
- tap water: 0.547201, 0.00119516 kg (2 suppliers, which the file names only by identifier); sum of these 0.548396 kg
- tempering, flat glass: 4.21663e-6 kg
- used bus: -8.60537e-9 unit
- used lorry with refrigeration machine, 16 metric ton: -7.615e-6 unit
- used lorry, 16 metric ton: -3.10986e-8 unit
- used lorry, 28 metric ton: -2.07324e-8 unit
- used lorry, 40 metric ton: -1.24394e-8 unit
- waste aluminium: -0.00263035 kg
- waste bulk iron, excluding reinforcement: -0.0178193, -0.00856923, -0.000223994 kg (3 suppliers, which the file names only by identifier); sum of these -0.0266125 kg
- waste electric and electronic equipment: -0.000803819 kg
- waste glass sheet: -0.000279397, -7.11344e-6, -0.00107662 kg (3 suppliers, which the file names only by identifier); sum of these -0.00136313 kg
- waste polypropylene: -7.76908e-6, -0.000603937, -3.52125e-6, -0.00487824, -1.92309e-5, -4.656e-5, -1.82616e-5, -0.000696837 kg (8 suppliers, which the file names only by identifier); sum of these -0.00627436 kg
- waste polyurethane foam: -0.000164842, -1.29299e-7 kg (2 suppliers, which the file names only by identifier); sum of these -0.000164971 kg
- waste rubber, unspecified: -0.000229726, -0.0054723, -0.0054723 kg (3 suppliers, which the file names only by identifier); sum of these -0.0111743 kg
- wastewater from lorry production: -5.04353e-7, -7.14418e-5 m3 (2 suppliers, which the file names only by identifier); sum of these -7.19462e-5 m3
- wastewater, average: -2.64484e-6, -1.55014e-6, -0.000435387, -0.00010524 m3 (4 suppliers, which the file names only by identifier); sum of these -0.000544822 m3
- water, completely softened: 6.36357e-5, 8.85354e-5, 0.000118275 kg (3 suppliers, which the file names only by identifier); sum of these 0.000270447 kg
- wire drawing, copper: 3.84218e-6, 0.000572024 kg (2 suppliers, which the file names only by identifier); sum of these 0.000575866 kg
- wire drawing, steel: 0.0125028 kg
- zinc coat, coils: 0.00055356 m2

## Inputs from nature
- Water, well, in ground [natural resource, in water]: 0.000534307 m3

## Emissions to nature
- Ammonia [air, unspecified]: 1.7144e-7 kg
- Benzene [air, unspecified]: 1.00711e-7 kg
- Cadmium II [air, unspecified]: 1.33e-11 kg
- Carbon dioxide, fossil [air, non-urban air or from high stacks]: 0.000175293 kg
- Carbon dioxide, fossil [air, unspecified]: 0.00486642 kg
- Carbon monoxide, fossil [air, unspecified]: 7.4803e-6 kg
- Chromium III [air, unspecified]: 2.25255e-9 kg
- Copper ion [air, unspecified]: 2.25255e-9 kg
- Dinitrogen monoxide [air, unspecified]: 1.7144e-7 kg
- Lead II [air, unspecified]: 1.4607e-13 kg
- Mercury II [air, unspecified]: 2.65232e-14 kg
- Methane, fossil [air, unspecified]: 1.2685e-7 kg
- NMVOC, non-methane volatile organic compounds [air, unspecified]: 6.05036e-5 kg
- Nickel II [air, unspecified]: 9.30233e-11 kg
- Nitrogen oxides [air, unspecified]: 4.61272e-5 kg
- Particulate Matter, < 2.5 um [air, unspecified]: 1.95272e-6 kg
- Particulate Matter, > 10 um [air, unspecified]: 8.37978e-8 kg
- Particulate Matter, > 2.5 um and < 10um [air, unspecified]: 1.62983e-7 kg
- Selenium IV [air, unspecified]: 1.33e-11 kg
- Sulfur dioxide [air, unspecified]: 9.22545e-7 kg
- Toluene [air, unspecified]: 4.23602e-8 kg
- Water [air, unspecified]: 9.90582e-5 m3
- Xylene [air, unspecified]: 4.23602e-8 kg
- Zinc II [air, unspecified]: 1.33e-9 kg
- BOD5, Biological Oxygen Demand [water, unspecified]: 9.68672e-7 kg
- COD, Chemical Oxygen Demand [water, unspecified]: 9.68672e-7 kg
- DOC, Dissolved Organic Carbon [water, unspecified]: 4.23602e-7 kg
- TOC, Total Organic Carbon [water, unspecified]: 4.23602e-7 kg
- Water [water, unspecified]: 0.000422333 m3
