# treatment of aluminium scrap, new, at remelter

Dataset: EcoSpold 2, unit process
Geography: RER
Time period: 2005-01-01 to 2022-12-31
Technology level: current
Classification: EcoSpold01Categories: metals/extraction
Classification: ISIC rev.4 ecoinvent: 2420:Manufacture of basic precious and other non-ferrous metals
Scenario: Business-as-Usual
System model: Allocation at the point of substitution
Share of production covered: 92.4 %
Generated by: Pascal Lesage
Published in: European Aluminium Association 2008
Database: ecoinvent
isCopyrightProtected: true

## General comment
This dataset is based on two sources: the European Aluminium Association 2005 LCI data (EAA, 2008); and (2) the ecoinvent v2.2 dataset for the same activity (Althaus, 2009), itself largely based on EAA data from 2000. Priority was given to data contained in EAA (2008); Althaus (2009) was used only in cases where it was found to be more complete that EAA (2008).
Remelters use mainly reverbatory furnaces, and this dataset is based on this furnace technology only.
The dataset excludes, for lack of access to data, salt slag and dross recycling. According to EAA, this data gap represents approximately 10-20% of potential impacts, as calculated using the CML 2001 method.
The following emissions to air are reported in EAA 2008 but excluded from this dataset: CO (0.095 kg/tonne secondary aluminium), Dust/particulates (0.041 kg/tonne secondary aluminium), NOx (0.329 kg/tonne secondary aluminium), SO2 (0.051 kg/tonne secondary aluminium), and VOC (0.050 kg/tonne secondary aluminium). These are assumed to be combustion emissions or electricity production emissions, conclusion arrived at by comparing gate-to-gate emissions with the cradle-to-gate emissions also reported in EAA 2008. Their inclusion wouldhave led to double-counting.

## Included activities start
The activity starts with the reception of new scrap (also called process scrap), i.e. surplus material arising during the production and fabrication of aluminium products up to the point where they are sold to the final consumer. These include extrusion discards, sheet edge trim, turnings, millings and dross.
New scrap does not require a scrap preparation activity.

## Included activities end
The activity ends with wrought aluminium billets. Note that the dataset excludes salt slag processing and dross recycling (data gap), as well as an output of unspecified metal for recycling output.

## Technology
Average technology for the aluminium recycled in Europe

## Reference product
- aluminium, wrought alloy: 1 kg; name secondaryAluminiumOutput; source European Aluminium Association 2008; By-product classification allocatable product; CPC 4153: Semi-finished products of aluminium or aluminium alloys; lognormal variance with pedigree 0.0012, pedigree (1,3,1,1,1)
  production volume 1.74945e9 kg
    Based on International Aluminium Institute data on the relative share of primary, secondary (new scrap) and aluminium (old scrap) aluminium in wrought alloy, the total amount of wrought alloy produced globally, and the total amount of primary aluminium ingots produced globally.
  property price 1.44 EUR2005
    Estimated based on literature values and expert judgement. Aluminium ccast alloys are about 90% of the price of aluminium wrought alloys.
  properties: carbon allocation 0 kg, carbon content 0, carbon content, fossil 0, carbon content, non-fossil 0, dry mass 1 kg, water content 0, water in wet mass 0 kg, wet mass 1 kg

## Inputs from technosphere
- acrylonitrile-butadiene-styrene copolymer: 1.74055e-5 kg
- activated carbon, granular: 1.08137e-5 kg
- alkyd paint, white, without solvent, in 60% solution state: 7.35648e-8, 3.49222e-7 kg (2 suppliers, which the file names only by identifier); sum of these 4.22786e-7 kg
- aluminium casting facility: 5.29871e-14 unit
- aluminium oxide, non-metallurgical: 0.0002168, 0.00128057 kg (2 suppliers, which the file names only by identifier); sum of these 0.00149737 kg
- aluminium scrap, new: -0.00805248, -0.00805248 kg (2 suppliers, which the file names only by identifier); sum of these -0.016105 kg
- aluminium, cast alloy: 0.0786579 kg
- aluminium, primary, ingot: 0.000315275, 5.72464e-5 kg (2 suppliers, which the file names only by identifier); sum of these 0.000372521 kg
- aluminium, wrought alloy: 1.45871e-5 kg
- ammonia, anhydrous, liquid: 1.46365e-6, 1.53406e-7, 3.23923e-6, 5.63795e-6, 7.5399e-7, 6.85782e-7, 1.62236e-5, 4.84649e-7 kg (8 suppliers, which the file names only by identifier); sum of these 2.86423e-5 kg
- chromium: 1.6321e-7 kg
- clay: 8.68426e-9, 5.65761e-5 kg (2 suppliers, which the file names only by identifier); sum of these 5.65848e-5 kg
- coating powder: 3.06e-5, 1.51121e-5 kg (2 suppliers, which the file names only by identifier); sum of these 4.57121e-5 kg
- copper, cathode: 0.000951845 kg
- diesel, burned in diesel-electric generating set, 10MW: 0.000268404 MJ
- electricity, medium voltage: 0.264202, 0.00595575, 0.0168879, 0.0132455, 0.000177362, 0.000904974, 0.00141336, 0.0546445, 0.0040507, 0.00298897 kWh (10 suppliers, which the file names only by identifier); sum of these 0.364471 kWh
- epoxy resin, liquid: 3.77582e-5, 7.95391e-6 kg (2 suppliers, which the file names only by identifier); sum of these 4.57121e-5 kg
- ethoxylated alcohol (AE7): 2.91094e-6, 1.38186e-5 kg (2 suppliers, which the file names only by identifier); sum of these 1.67295e-5 kg
- ethylene: 8.13979e-7, 4.31055e-7, 1.30601e-8 kg (3 suppliers, which the file names only by identifier); sum of these 1.25809e-6 kg
- ethylene glycol: 0.00323671 kg
- fibre, viscose: 6.85838e-5 kg
- flat glass, uncoated: 2.12946e-5, 0.000103409 kg (2 suppliers, which the file names only by identifier); sum of these 0.000124703 kg
- fly ash and scrubber sludge: -1.17757e-6, -9.94855e-5, -3.92427e-5 kg (3 suppliers, which the file names only by identifier); sum of these -0.000139906 kg
- glass fibre reinforced plastic, polyester resin, hand lay-up: 1.66155e-6 kg
- hazardous waste, for incineration: -0.000410444, -0.000197381, -5.15942e-6 kg (3 suppliers, which the file names only by identifier); sum of these -0.000612984 kg
- hazardous waste, for underground deposit: -0.000103482, -6.66552e-6 kg (2 suppliers, which the file names only by identifier); sum of these -0.000110147 kg
- heat, district or industrial, natural gas: 0.161657, 0.274163 MJ (2 suppliers, which the file names only by identifier); sum of these 0.43582 MJ
- heat, district or industrial, other than natural gas: 0.00778122 MJ
- inert waste, for final disposal: -4.15389e-5, -0.00638054 kg (2 suppliers, which the file names only by identifier); sum of these -0.00642207 kg
- injection moulding: 0.00611906 kg
- isopropanol: 0.000349246, 7.35699e-5 kg (2 suppliers, which the file names only by identifier); sum of these 0.000422816 kg
- kaolin: 0.00132786 kg
- lead: 0.00602031 kg
- light emitting diode: 4.15678e-7 kg
- lubricating oil: 0.0026028, 0.000548289 kg (2 suppliers, which the file names only by identifier); sum of these 0.00315108 kg
- magnesium: 2.65143e-6 kg
- methyl ethyl ketone: 8.30402e-7, 3.13354e-7 kg (2 suppliers, which the file names only by identifier); sum of these 1.14376e-6 kg
- nickel, class 1: 9.52082e-8 kg
- nitric acid, without water, in 50% solution state: 1.95286e-6, 2.54053e-5, 2.90165e-6, 7.21587e-6, 9.38402e-6, 3.45746e-6, 1.18914e-5, 3.13497e-6, 2.89091e-6 kg (9 suppliers, which the file names only by identifier); sum of these 6.82345e-5 kg
- nitrogen, liquid: 0.00285745, 0.000784351 kg (2 suppliers, which the file names only by identifier); sum of these 0.0036418 kg
- nylon 6: 7.76759e-6, 3.83609e-6 kg (2 suppliers, which the file names only by identifier); sum of these 1.16037e-5 kg
- palladium: 1.38716e-7 kg
- platinum: 7.3982e-7 kg
- polyethylene terephthalate, granulate, amorphous: 8.43052e-5 kg
- polyethylene, high density, granulate: 0.00713631 kg
- polyethylene, low density, granulate: 5.80184e-5 kg
- polyphenylene sulfide: 0.0127156 kg
- polypropylene, granulate: 0.000204733 kg
- polyurethane, flexible foam: 9.03874e-5, 1.85131e-5 kg (2 suppliers, which the file names only by identifier); sum of these 0.0001089 kg
- polyvinylchloride, suspension polymerised: 3.89506e-5 kg
- printed wiring board, mounted mainboard, desktop computer, Pb free: 7.89913e-6 kg
- propane, burned in building machine: 0.000589828 MJ
- propylene glycol, liquid: 8.30345e-6, 4.10073e-6 kg (2 suppliers, which the file names only by identifier); sum of these 1.24042e-5 kg
- reinforcing steel: 0.0219764 kg
- road vehicle factory: 3.59439e-11 unit
- scrap steel: -4.27695e-10, -1.04837e-6, -3.37575e-7 kg (3 suppliers, which the file names only by identifier); sum of these -1.38637e-6 kg
- section bar rolling, steel: 1.38056e-5 kg
- sheet rolling, aluminium: 1.68826e-5 kg
- sheet rolling, steel: 0.0021735 kg
- silica sand: 0.00172435 kg
- silicon carbide: 4.35074e-5 kg
- sodium hydroxide, without water, in 50% solution state: 8.02391e-5 kg
- sodium nitrite: 3.32432e-7, 1.63735e-7 kg (2 suppliers, which the file names only by identifier); sum of these 4.96167e-7 kg
- spent solvent mixture: -0.000717322, -6.56659e-6, -0.000280283 kg (3 suppliers, which the file names only by identifier); sum of these -0.00100417 kg
- steel, chromium steel 18/8, hot rolled: 8.04753e-5 kg
- steel, low-alloyed, hot rolled: 0.05055 kg
- sulfuric acid: 0.000414064, 5.41683e-5 kg (2 suppliers, which the file names only by identifier); sum of these 0.000468233 kg
- synthetic rubber: 0.00156622 kg
- tap water: 0.397727, 0.0318517, 0.00126315, 0.272177, 0.00235698, 0.364495, 0.000828614, 0.00634952 kg (8 suppliers, which the file names only by identifier); sum of these 1.07705 kg
- tempering, flat glass: 0.000124703 kg
- tetraethyl orthosilicate: 0.00109914 kg
- titanium dioxide: 1.19708e-5, 2.39416e-5 kg (2 suppliers, which the file names only by identifier); sum of these 3.59125e-5 kg
- used glider, electric scooter: -8.13051e-5 kg
- used glider, passenger car: -0.00311603 kg
- used internal combustion engine, passenger car: -0.127156 kg
- waste emulsion paint, separated: -6.93186e-7 kg
- waste mineral oil: -7.38138e-6, -0.0007807, -0.000298165 kg (3 suppliers, which the file names only by identifier); sum of these -0.00108625 kg
- waste paint on metal: -4.22721e-6, -3.5882e-8 kg (2 suppliers, which the file names only by identifier); sum of these -4.26309e-6 kg
- waste plastic, industrial electronics: -2.41148e-7, -1.59622e-5 kg (2 suppliers, which the file names only by identifier); sum of these -1.62033e-5 kg
- waste plastic, mixture: -0.000200277, -1.01204e-6, -2.23291e-6, -0.000173577, -0.00140205, -1.33818e-5, -5.24855e-6, -5.52715e-6 kg (8 suppliers, which the file names only by identifier); sum of these -0.00180331 kg
- waste x-ray film: -7.85033e-5 kg
- wastewater, average: -2.93981e-6, -0.000489197, -0.000116977 m3 (3 suppliers, which the file names only by identifier); sum of these -0.000609114 m3
- water, deionised: 9.50125e-8, 2.63942e-5, 8.56838e-5 kg (3 suppliers, which the file names only by identifier); sum of these 0.000112173 kg
- wax, lost-wax casting: 0.000597171 kg
- wire drawing, copper: 0.000938586 kg
- zinc: 5.70404e-6 kg
- zircon: 0.000370945 kg

## Emissions to nature
- NMVOC, non-methane volatile organic compounds [air, unspecified]: 0.000592888 kg
- Nitrogen [air, unspecified]: 0.0036418 kg
- Propanol [air, urban air close to ground]: 0.000266877 kg
- Water [air, unspecified]: 5.96591e-5 m3
- Water [air, urban air close to ground]: 7.02081e-5 m3
- BOD5, Biological Oxygen Demand [water, surface water]: 1.76818e-9 kg
- BOD5, Biological Oxygen Demand [water, unspecified]: 3.2097e-6 kg
- COD, Chemical Oxygen Demand [water, surface water]: 1.31247e-8 kg
- COD, Chemical Oxygen Demand [water, unspecified]: 2.38259e-5 kg
- DOC, Dissolved Organic Carbon [water, surface water]: 4.86099e-9 kg
- DOC, Dissolved Organic Carbon [water, unspecified]: 8.82438e-6 kg
- Phosphate [water, surface water]: 6.80056e-11 kg
- Phosphate [water, unspecified]: 1.2345e-7 kg
- TOC, Total Organic Carbon [water, surface water]: 4.86099e-9 kg
- TOC, Total Organic Carbon [water, unspecified]: 8.82438e-6 kg
- Water [water, unspecified]: 0.000338068 m3

## Sampling procedure
Literature / Survey

## Extrapolations
No extrapolation. The percent representativeness is based on the total volume of remelters who supplied data for EAA (2008), based on total ingot output (2.66 Mt) * the average clean scrap content of the ingots (66%), as reported by EAA (2008), divided by the total volume of metal refines in 2005 (1.9 Mt) according to EAA (2005), i.e. 2.66Mt*66%/1.9Mt.

## Review by Christian Bauer 2012-06-01
passed

## Review by Hans-Jörg Althaus 2012-06-01
ok
