# transmission network construction, electricity, high voltage direct current land cable

Dataset: EcoSpold 2, unit process
Geography: RER
Time period: 1998-01-01 to 2022-12-31
Technology level: current
Classification: ISIC rev.4 ecoinvent: 4220:Construction of utility projects
Synonyms: HVDC land cable
Scenario: Business-as-Usual
System model: Allocation at the point of substitution
Generated by: Heidi Hottenroth
Published in: Jorge, R. 2012
Database: ecoinvent
isCopyrightProtected: true

## General comment
This dataset represents the construction and decommissioning of 1 km transmission network high voltage direct current land cable. The service life of the network was assumed to be 40 years. For this period also maintenance is considered as a service. Default value for power losses at 50 % load sum up to 8.06E6 kWh/km. Different from the literature source recycling was modelled according to the cut-off approach.
The inventory was modelled according to Jorge, R., Hawkins, T.R., Hertwich, E.G. (2012): Life cycle assessment of electricity transmission and distribution - part 1: power lines and cables. Int J Life Cycle Assess 17: 9-15, supplementary material

## Included activities start
The activity starts with cable production according to material composition (energy requirements for cable production not included) and cable laying. Maintenance is included as a service. Substations are not included.

## Included activities end
This activity ends with the decommissioning of transmission network according to material composition.

## Geography
The scope of the underlying literature source is Europe

## Technology
The voltage level is assumed to be 400 kV.

## Time period
Time frame of the underlying literature sources

## Parameters
- lifetime: 40 year

## Reference product
- iron scrap, unsorted: 1 kg; name BP_iron_scrap; = steel*0.9; By-product classification Recyclable; CPC 39310: Slag, dross, scalings and other waste from the manufacture of iron or steel; lognormal variance with pedigree 0.0133, pedigree (3,3,3,3,3)
  Proxy for steel generated through dismantling of the transmission network. 90 % Recycling is assumed by the original source. Based on the amount of the corresponding material inputs.
  production volume 1.40454e6 kg
    Calculated from production volume of reference product using the relative outputs.
  property price 0.149 EUR2005
    Temporary price data. Calculated as 90% of purchasers price based on: estimated at 85% of sorted scrap
  properties: allocation factor 0.00429135, carbon allocation 0 kg, carbon content 0, carbon content, fossil 0, carbon content, non-fossil 0, dry mass 1 kg, true value 455.94, water content 0, water in wet mass 0 kg, wet mass 1 kg

## Inputs from technosphere
- copper scrap, sorted, pressed: -0.0124734 kg; name BP_copper_recycling; = Cu*0.9; lognormal variance with pedigree 0.0152, pedigree (3,3,3,5,3)
  Proxy for copper generated through dismantling of the transmission network. 90 % Recycling is assumed by the original source. Based on the amount of the corresponding material inputs.
  production volume
    Calculated from production volume of reference product using the relative outputs.
  properties: dry mass 1 kg, price 2.84 EUR2005, wet mass 1 kg
- copper, cathode: 0.0138593 kg; name Cu; lognormal variance with pedigree 0.0112, pedigree (3,3,4,1,1)
  Literature Value. for cable
  properties: copper content 1, dry mass 1 kg, wet mass 1 kg
- diesel, burned in agricultural machinery: 0.35261 MJ; = 500*20*37.4; lognormal variance with pedigree 0.0112, pedigree (3,3,4,1,1)
  Calculated Value. 500 h with 20 l/h; assumed heating value diesel 37.4 MJ/l
- kraft paper: 0.00471404 kg; name paper; lognormal variance with pedigree 0.0112, pedigree (3,3,4,1,1)
  Literature Value. paper; for cable
  properties: carbon content, fossil 9.3e-6, carbon content, non-fossil 0.428894, dry mass 0.945 kg, water content 0.0582011, wet mass 1 kg
- lead: 0.0133879 kg; lognormal variance with pedigree 0.0112, pedigree (3,3,4,1,1)
  Literature Value. for cable
  properties: dry mass 1 kg, wet mass 1 kg
- lubricating oil: 0.00367695 kg; name oil; lognormal variance with pedigree 0.0112, pedigree (3,3,4,1,1)
  Literature Value. Insulation oil for cable
  properties: carbon content, fossil 0.75, dry mass 1 kg, wet mass 1 kg
  note on carbon content, fossil: Lubricating oil is produced from diesel. C-content/dry mass of fats and oils considered 75%, from: ecoinvent v2.2 report, n 15a, pg 40
- maintenance, transmission network, electricity, high voltage direct current land cable: 3.77123e-5 km*year; = lifetime; lognormal variance with pedigree 0.0173, pedigree (4,3,4,3,1)
  Literature Value.
- polyethylene, high density, granulate: 0.000942808 kg; name HDPE; lognormal variance with pedigree 0.043825, pedigree (3,3,5,2,2)
  Literature Value. polyethylene (assumption: high density) for cable trace. Processing unknown
  properties: carbon content, fossil 0.857143, dry mass 1 kg, wet mass 1 kg
  note on carbon content, fossil: Polyethylene is formed out of a huge amount of ethylene monomers (C2H4) (ecoinvent v2.2 report 11_II). MW=28 g/mol
- polyethylene, low density, granulate: 0.0024513 kg; name LDPE; lognormal variance with pedigree 0.0112, pedigree (3,3,4,1,1)
  Literature Value. polyethylene (assumption: low density) for cable (cover). Processing unknown
  properties: carbon content, fossil 0.857143, dry mass 1 kg, wet mass 1 kg
- sand: 1.50849 kg; lognormal variance with pedigree 0.0112, pedigree (3,3,4,1,1)
  Literature Value. for cable trace
  properties: dry mass 1 kg, wet mass 1 kg
- scrap copper: -6.21106e-5, -0.00132382 kg (2 suppliers, which the file names only by identifier); sum of these -0.00138593 kg; = Cu*0.1; lognormal variance with pedigree 0.0152, pedigree (3,3,3,5,3)
  Waste generated through dismantling of the transmission network. Based on the amount of the corresponding material inputs.
  production volume
    Calculated from production volume of reference product using the relative outputs.
  properties: dry mass 1 kg, wet mass 1 kg
- scrap steel: -4.05617e-7, -0.000320149 kg (2 suppliers, which the file names only by identifier); sum of these -0.000320555 kg; = steel*0.1; lognormal variance with pedigree 0.0133, pedigree (3,3,3,3,3)
  (same comment as for scrap copper)
  production volume
    Calculated from production volume of reference product using the relative outputs.
  properties: dry mass 1 kg, wet mass 1 kg
- steel, low-alloyed: 0.00320555 kg; name steel; lognormal variance with pedigree 0.0112, pedigree (3,3,4,1,1)
  Literature Value. steel; for cable
  properties: carbon content, fossil 0.005, dry mass 1 kg, wet mass 1 kg
- waste mineral oil: -8.88277e-5, -0.00358812 kg (2 suppliers, which the file names only by identifier); sum of these -0.00367695 kg; = oil; lognormal variance with pedigree 0.0133, pedigree (3,3,3,3,3)
  (same comment as for scrap copper)
  production volume
    Calculated from production volume of reference product using the relative outputs.
  properties: carbon content, fossil 0.864444, dry mass 0.9 kg, water content 0.111111, wet mass 1 kg
  note on carbon content, fossil: Tab A.6, ecoinvent v2.2 report 13_I. C content has been calculated after data in the tables, and then referred to 1 kg DM
- waste paper, unsorted: -0.00235702, -0.00235702 kg (2 suppliers, which the file names only by identifier); sum of these -0.00471404 kg; = paper; lognormal variance with pedigree 0.0133, pedigree (3,3,3,3,3)
  (same comment as for scrap copper)
  production volume
    Calculated from production volume of reference product using the relative outputs.
  properties: price 0.093 EUR2005
- waste wire plastic: -0.00339411 kg; name BP_wire_plastic; = LDPE + HDPE; lognormal variance with pedigree 0.0152, pedigree (3,3,3,5,3)
  (same comment as for scrap copper)
  production volume
    Calculated from production volume of reference product using the relative outputs.
  properties: carbon content, fossil 0.549508, dry mass 0.9645 kg, heating value, net 25.95 MJ, water content 0.0368066, wet mass 1 kg
  note on heating value, net: Value taken from the general comment of the treatment dataset.
- wire drawing, copper: 0.0138593 kg; = Cu; lognormal variance with pedigree 0.2106, pedigree (5,5,5,5,5)
  Calculated Value. Represents the processing of the copper.

## Inputs from nature
- Occupation, construction site [natural resource, land]: 3.58267e-5 m2*year; = 1000*1*0,038; lognormal variance with pedigree 0.25, pedigree (5,5,5,5,5)
  Estimated Value. Occupation during construction time.

## Sampling procedure
LCI data on resource use and emissions for production of materials, installation, maintenance, and end of life were provided by the Danish utility company Energinet.dk. No data referring to cable manufacturing (assembly of components) were available, and hence this process was not included.
