# natural gas, high pressure, import from RU

Dataset: EcoSpold 2, unit process
Geography: RoE
Time period: 2000-01-01 to 2022-12-31
Technology level: current
Classification: ISIC rev.4 ecoinvent: 3520:Manufacture of gas; distribution of gaseous fuels through mains
Scenario: Business-as-Usual
System model: Allocation at the point of substitution
Generated by: Maresa Bussa
Published in: Bussa, M. 2022
Database: ecoinvent
isCopyrightProtected: true

## General comment
This dataset represents the import of natural gas [m3] from Russia to RER without BE, CH, ES, FR, GB, IT, NL. The gas inputs to this import activity shares of gas supplied through LNG import and via long-distance pipeline for the specific combination of origin and destination. Bussa et al. (2022) sourced the information about exported volumes and receiving European countries from (BP 2020). Where different pipelines route from the production to the receiving country exist, a weighted average transport distance was calculated. Where available, the different routes were weighted by actual flow rates, otherwise the pipeline capacities were used. For the reference transport distance to RER-region the transport distances individual receiving countries are weighted by the import volumes given in BP 2020.
Reference(s):
Bussa, M., N. Jungbluth, Ch. Meili (2022) Life cycle inventories for long-distance transport and distribution of natural gas. ESU-services Ltd. Schaffhausen, Switzerland. Available from: http://esu-services.ch/data/public-lci-reports/

## Included activities start
The activity starts from the outbound gate of the natural gas production plants.

## Included activities end
This dataset describes the transport needed for an average export (or for long-distance transport with producing countries for inputs into the domestic consumption mix) of natural gas from the place of origin. Gas losses and emissions during seasonal storage are included. The dataset “Natural gas, burned in gas turbine” is used to account for the emissions and infrastructure of the operational energy requirements of the storage capacities. The infrastructure of the storage is neglected in this study as it is assumed to be insignificant. The activity ends at the "entry gate" of national markets for natural gas at high pressure.

## Geography
This geography represents the subset of European countries, excluding the following: Belgium, Germany, Spain, France, United Kingdom, Italy, Netherlands

## Technology
An average leakage rate of 0.1% of the gas stored was used by Bussa et al. (2022), based on previous studies. Furthermore, Bussa et al. assumed that 15% of total natural gas supply is temporarily stored, based on European Commission (2015), for all geographies covered.

## Reference product
- natural gas, high pressure: 1 m3; By-product classification allocatable product; CPC 12020: Natural gas, liquefied or in the gaseous state; CAS 14493-06-2
  production volume 7.91e10 m3
    Estimated by subtracting the sum of supply to country-specific consumption mixes within RER from the total supply from the producing country in question to the RER region in 2019 (based on Bussa et al. 2022)
  property heating value, gross 40 MJ
    At standard conditions; based on Meili et al. (2022) section 5.2
  property heating value, net 36 MJ
    At standard conditions; based on Meili et al. (2022) section 5.2
  property price 0.166 EUR2005
    Temporary price data. Calculated as 90% of purchasers price based on: 2005 price for Europe-27 Import (US$ and kg) in UN Commodity Trade Statistics Database - Natural gas in gaseous state (http://data.un.org/Data.aspx?q=natural+gas&d=ComTrade&f=_l1Code%3a28%3bcmdCode%3a271121; accessed 4 January 2011), using density of natural gas of 0.8 kg/m3 for unit conversion.
  properties: carbon allocation 0.544635 kg, carbon content 0.741, carbon content, fossil 0.741, carbon content, non-fossil 0, dry mass 0.735 kg, water content 0, water in wet mass 0 kg, wet mass 0.735 kg

## Inputs from technosphere
- natural gas, burned in gas turbine: 0.081 MJ; lognormal variance with pedigree 0.168695, pedigree (4,1,5,3,5)
  Energy expenditure of seasonal storage
- natural gas, high pressure: 0.10001 m3; lognormal variance with pedigree 0.121195, pedigree (2,1,1,1,5)
  Imports via LNG
  properties: carbon content, fossil 0.741, dry mass 0.735 kg, heating value, gross 40 MJ, heating value, net 36 MJ, wet mass 0.735 kg
  note on heating value, gross: At standard conditions; based on Meili et al. (2022) section 5.2
- natural gas, high pressure: 0.741835, 0.160125 m3 (2 suppliers, which the file names only by identifier); sum of these 0.90196 m3; lognormal variance with pedigree 0.121195, pedigree (2,1,1,1,5)
  Imports via pipeline + losses. This input of natural gas is directly linked to the corresponding supply, with the shares of offshore and onshore production according to Meili et al. (2022) section 4.1.
- transport, pipeline, offshore, long distance, natural gas: 0.3116 metric ton*km; lognormal variance with pedigree 0.2406, pedigree (2,1,1,1,5)
  Average weighted distance is estimated based on trade statistics and pipeline network.
- transport, pipeline, onshore, long distance, natural gas: 2.9564 metric ton*km; lognormal variance with pedigree 0.2406, pedigree (2,1,1,1,5)
  Average weighted distance is estimated based on trade statistics and pipeline network.

## Emissions to nature
- Butane [air, non-urban air or from high stacks]: 6.3521e-7 kg; lognormal variance with pedigree 0.1717, pedigree (2,5,3,1,5)
  Emissions from storage. Calculated based on average losses and gas composition
- Carbon dioxide, fossil [air, non-urban air or from high stacks]: 2.293e-6 kg; lognormal variance with pedigree 0.131195, pedigree (2,5,3,1,5)
  Emissions from storage. Calculated based on average losses and gas composition
- Ethane [air, non-urban air or from high stacks]: 5.4904e-6 kg; lognormal variance with pedigree 0.1717, pedigree (2,5,3,1,5)
  Emissions from storage. Calculated based on average losses and gas composition
- Mercury II [air, non-urban air or from high stacks]: 1e-12 kg; lognormal variance with pedigree 0.778173, pedigree (2,5,3,1,5)
  Emissions from storage. Calculated based on average losses and gas composition
- Methane, fossil [air, non-urban air or from high stacks]: 6.6287e-5 kg; lognormal variance with pedigree 0.1717, pedigree (2,5,3,1,5)
  Emissions from storage. Calculated based on average losses and gas composition
- NMVOC, non-methane volatile organic compounds [air, non-urban air or from high stacks]: 4.5738e-8 kg; lognormal variance with pedigree 0.1717, pedigree (2,5,3,1,5)
  Emissions from storage. Calculated based on average losses and gas composition
- Propane [air, non-urban air or from high stacks]: 1.2353e-6 kg; lognormal variance with pedigree 0.1717, pedigree (2,5,3,1,5)
  Emissions from storage. Calculated based on average losses and gas composition

## Sampling procedure
Literature. Online calculators for distances.The data for storage emissions are based on global data. The share of gas stored is a rough estimate based on European data. The average weighted transport distance is based on the trade movements 2019.
