# natural gas production, liquefied

Dataset: EcoSpold 2, unit process
Geography: US
Time period: 2019-01-01 to 2022-12-31
Technology level: current
Classification: ISIC rev.4 ecoinvent: 0620:Extraction of natural gas
Scenario: Business-as-Usual
System model: Allocation at the point of substitution
Share of production covered: 100 %
Generated by: Maresa Bussa
Published in: Bussa, M. 2022
Database: ecoinvent
isCopyrightProtected: true

## General comment
This dataset describes the production of 1 m3 of ‘natural gas, liquefied’ (LNG) in the United States of America, and it includes the processes and services needed to run the liquefaction process of natural gas. The reference flow refers to 1 standard cubic meter of natural gas in the gaseous state.
In a liquefaction plant, the natural gas is cooled to -161 °C to reach its liquid state and the CO2 is separated. The volume of natural gas in liquid state decreases to 1/600 of the volume in gaseous state. On average 8.6 % of the natural gas input is consumed to run the liquefaction process (Pospíšil et al. 2019 in Bussa et al. 2022). The separated CO2 is usually emitted into air and not pumped back into the gas reservoir. The resulting CO2-emissions are based on the natural gas composition. The leakage rate of 0.05 %, based on Schori et al. 2012, is used to calculate the emissions of other natural gas components.
Reference(s):
M. Bussa, N. Jungbluth, C. Meili (2022) Life cycle inventories for long-distance transport and distribution of natural gas. ESU-services Ltd. Schaffhausen, Switzerland. Available from: http://esu-services.ch/data/public-lci-reports/
Pospíšil J., Charvát P., Arsenyeva O., Klimeš L., Špiláček M. and Klemeš J. J. (2019) Energy demand of liquefaction and regasification of natural gas and the potential of LNG for operative thermal energy storage. In: Renewable and Sustainable Energy Reviews, 99, pp. 1-15, 10.1016/j.rser.2018.09.027.

## Included activities start
The activity starts with the gaseous natural gas delivered to the liquefaction plant.

## Included activities end
The activity ends with the liquified natural gas ready to be shipped. It includes the energy requirements, emissions and losses, and infrastructure for the liquefaction process. The liquefied gas is, usually, stored in a tank for 0.5-1.5 days prior shipping. Since an estimate of 9000 cycle per tank are considered, the overall balance of the tank construction and maintenance is negligible.

## Geography
the United States of America

## Technology
During compression, the CO2 present in the natural gas mix is separated and, in general, released to the atmosphere. The practice of pump-back in the original reservoir is not common. An average value of 0.05% of leakage is taken into account (Schori et al. 2012).

## Time period
Data on energy use for the liquefaction stem from a review of common technologies from 2019. Data on leakages stem from 1990.

## Reference product
- natural gas, liquefied: 1 m3; By-product classification allocatable product; CPC 12020: Natural gas, liquefied or in the gaseous state; CAS 14493-06-2
  production volume 4.75e10 m3
    Based on BP"s LNG trade statistics for 2019
  property carbon content, fossil 0.741
    Set equal to that of "natural gas, high pressure" (based on composition in Bussa et al. (2021), tab. 3.1).
  property heating value, gross 40 MJ
    Set equal to that of "natural gas, high pressure" (at standard conditions; based on Meili et al. 2022, section 5.2)
  property heating value, net 36 MJ
    (same comment as for natural gas, liquefied)
  property price 0.27 EUR2005
    Calculated value based on data from United Nations Commodity Trade Statistics Database (comtrade.un.org). UN comtrade category: 271111 Natural gas, liquified. Year 2005. Using exchange rate of 1EURO = 1.209 USD. Average of price of import into 5 main markets (EU, US, JP, IN and CN).
  properties: carbon allocation 0.544635 kg, carbon content 0.741, carbon content, non-fossil 0, dry mass 0.735 kg, water content 0, water in wet mass 0 kg, wet mass 0.735 kg

## Inputs from technosphere
- natural gas processing plant: 7.89e-13 unit; lognormal variance with pedigree 0.464437, pedigree (5,3,3,3,5)
  Estimate for Europe
- natural gas, burned in gas turbine: 3.105 MJ; lognormal variance with pedigree 0.128695, pedigree (4,1,1,3,5)
  Based on technology average
- natural gas, high pressure: 0.969735, 0.0307614 m3 (2 suppliers, which the file names only by identifier); sum of these 1.0005 m3
  Input of natural gas linked directly to domestic supply, with the shares of offshore and onshore production according to Meili et al. (2022) section 4.1.
  properties: carbon content, fossil 0.741, dry mass 0.735 kg, heating value, gross 40 MJ, heating value, net 36 MJ, wet mass 0.735 kg
  note on heating value, gross: At standard conditions; based on Meili et al. (2022) section 5.2

## Emissions to nature
- Butane [air, non-urban air or from high stacks]: 3.176e-6 kg; lognormal variance with pedigree 0.1717, pedigree (2,5,3,1,5)
  Based on leakage rate and natural gas composition
- Carbon dioxide, fossil [air, non-urban air or from high stacks]: 0.02293 kg; lognormal variance with pedigree 0.131195, pedigree (4,3,3,1,5)
  Carbon dioxide separation, based onnatural gas composition
- Ethane [air, non-urban air or from high stacks]: 2.7452e-5 kg; lognormal variance with pedigree 0.1717, pedigree (2,5,3,1,5)
  Based on leakage rate and natural gas composition
- Mercury II [air, non-urban air or from high stacks]: 5e-12 kg; lognormal variance with pedigree 0.778173, pedigree (4,3,3,1,5)
  Based on leakage rate and natural gas composition
- Methane, fossil [air, non-urban air or from high stacks]: 0.00033143 kg; lognormal variance with pedigree 0.1717, pedigree (4,3,3,1,5)
  Based on leakage rate and natural gas composition
- NMVOC, non-methane volatile organic compounds [air, non-urban air or from high stacks]: 2.2869e-7 kg; lognormal variance with pedigree 0.1717, pedigree (2,5,3,1,5)
  Based on leakage rate and natural gas composition
- Propane [air, non-urban air or from high stacks]: 6.1763e-6 kg; lognormal variance with pedigree 0.1717, pedigree (2,5,3,1,5)
  Based on leakage rate and natural gas composition

## Sampling procedure
Literature. Global data for energy requirements combined and natural gas characteristics.

## Extrapolations
A default inventory, established based on literature, is assumed representative for all geographies.
