# uranium enrichment centrifuge facility construction

Dataset: EcoSpold 2, unit process
Geography: RU
Time period: 1980-01-01 to 2022-12-31
Technology level: current
Classification: EcoSpold01Categories: nuclear power/production
Classification: ISIC rev.4 ecoinvent: 4290:Construction of other civil engineering projects
Tags: ConvertedDataset
Scenario: Business-as-Usual
System model: Allocation at the point of substitution
Generated by: [System]
Published in: Dones, R. 2007
Database: ecoinvent
isCopyrightProtected: true

## General comment
The material and energy requirements for construction have been roughly estimated on the basis of the data from an old US reference and scaling them down by the ratio of the capacities (centrifuge process is modular, therefore in first approximation linearity can be assumed for requirements). It is assumed that 75% of reinforced concrete is dumped as non-contaminated waste from decommissioning. Although Russian facilities have higher capacity, the original dataset developed for URENCO plants has been directly used herewith for the previously explained reason, with the only difference of electricity requirements from the Russian mix. This mix has been approximated using existing ecoinvent v2.0 electricity datasets for Europe.
[This dataset was already contained in the ecoinvent database version 2. It was not individually updated during the transfer to ecoinvent version 3. Life Cycle Impact Assessment results may still have changed, as they are affected by changes in the supply chain, i.e. in other datasets. This dataset was generated following the ecoinvent quality guidelines for version 2. It may have been subject to central changes described in the ecoinvent version 3 change report (http://www.ecoinvent.org/database/ecoinvent-version-3/reports-of-changes/), and the results of the central updates were reviewed extensively. The changes added e.g. consistent water flows and other information throughout the database. The documentation of this dataset can be found in the ecoinvent reports of version 2, which are still available via the ecoinvent website. The change report linked above covers all central changes that were made during the conversion process.]

## Included activities end
The module includes: estimated land use of a plant with capacity of 1500 t SWU (separative work unit); energy (electricity, diesel, and light oil) and material requirements for the construction of the facility; transport requirements during construction; energy and transport requirements (for non-contaminated inerts concrete with reinforcing bars) during decommissioning; disposal of the non-contaminated inerts. The non contaminated metals are assumed to be recycled.

## Geography
US data.

## Technology
Available construction material and energy data refer to a model plant in early 1980s.

## Reference product
- uranium enrichment centrifuge facility: 1 unit; By-product classification allocatable product; CPC 53269: Other constructions for manufacturing
  EcoSpold01Location=RU
  production volume 0.368889 unit
    16.6 million SWU (http://www.wise-uranium.org/efac.html#ENR) ; Lifetime capacity per facility: 45 million SWU (1.5 million SWU in 30 years)
  property price 1.85338e9 EUR2005
    EU27 I/O database(in the 'EU & DK Input Output Database' (available in SimaPro)); -79 Building, non-residential EU 27 (calculated to be 38.169 EUR2003/kg). Based on consumption of (_53 Iron basic, virgin, EU27;7.25517782294095E-3 kg/EUR building; 0.45 EUR2003 per kg DS), (_61 Iron, after first processing, EU27;5.8766830719783E-3kg/EUR building; 0.62 EUR2003 per kg DS), (_65 Fabricated metal products, except machinery, EU27; 8.9167022775554E-3 kg/EUR building; 3.63 EUR2003 per kg DS) and (_66 Machinery and equipment n.e.c., EU27;4.15071881936446E-3 kg/EUR building; 5.71 EUR2003 per kg DS) - 48929000 kg
  properties: carbon allocation 0 kg, carbon content 0

## Inputs from technosphere
- aluminium, wrought alloy: 6.5e6 kg; lognormal variance with pedigree 0.16, pedigree (1,1,5,1,1)
  old reference
  EcoSpold01Location=RER
  properties: dry mass 1 kg, wet mass 1 kg
- brass: 26000 kg; lognormal variance with pedigree 0.16, pedigree (1,1,5,1,1)
  EcoSpold01Location=CH
  old reference
  properties: dry mass 1 kg, wet mass 1 kg
- concrete, normal strength: 75000 m3; lognormal variance with pedigree 0.16, pedigree (1,1,5,1,1)
  EcoSpold01Location=CH
  old reference
  properties: dry mass 2190 kg, water content 0.086758, wet mass 2380 kg
- copper, cathode: 770000 kg; lognormal variance with pedigree 0.16, pedigree (1,1,5,1,1)
  old reference
  EcoSpold01Location=RER
  properties: dry mass 1 kg, wet mass 1 kg
- diesel, burned in building machine: 6.9e8 MJ; lognormal variance with pedigree 0.16, pedigree (1,1,5,1,1)
  old reference
  EcoSpold01Location=GLO
  properties: heating value, net 1 MJ
- diesel, burned in diesel-electric generating set, 10MW: 6.9e8 MJ; lognormal variance with pedigree 0.16, pedigree (1,1,5,1,1)
  EcoSpold01Location=GLO
  old reference
  properties: heating value, net 1 MJ
- electricity, high voltage: 1.14e6 kWh; lognormal variance with pedigree 0.16, pedigree (1,1,5,1,1)
  Old US reference for total electricity. Electricity from reservoir hydropower plants. As a simplifying assumption, reservoir plants are modelled as non-alpine reservoir plants. Alpine reservoir hydropower plants are neglected.
- electricity, high voltage: 4.8173e6 kWh; = 3892300+925000; lognormal variance with pedigree 0.0406, pedigree (1,1,5,1,1)
  old US reference for total electricity
  EcoSpold01Location=PL
- lubricating oil: 39648, 8352 kg (2 suppliers, which the file names only by identifier); sum of these 48000 kg; lognormal variance with pedigree 0.16, pedigree (1,1,5,1,1)
  EcoSpold01Location=RER
  old reference
  properties: carbon content, fossil 0.75, dry mass 1 kg, heating value, net 40.2 MJ, wet mass 1 kg
  note on carbon content, fossil: Lubricating oil is produced from diesel. C-content/dry mass of fats and oils considered 75%, from: ecoinvent v2.2 report, n 15a, pg 40
  note on heating value, net: Literature value, Source: IPCC 2006, 2006 IPCC Guidelines for National Greenhouse Gas Inventories, Prepared by the National Greenhouse Gas Inventories Programme, Eggleston H.S., Buendia L., Miwa K., Ngara T. and Tanabe K. (eds). Published: IGES, Japan
- reinforcing steel: 9e6 kg; lognormal variance with pedigree 0.16, pedigree (1,1,5,1,1)
  EcoSpold01Location=RER
  old reference
  properties: carbon content, fossil 0.004, dry mass 1 kg, wet mass 1 kg
- steel, chromium steel 18/8, hot rolled: 1.63e7 kg
  EcoSpold01Location=RER
  properties: carbon content, fossil 0.0008, dry mass 1 kg, wet mass 1 kg
  note on carbon content, fossil: Stainless steel model is the grade 304 steel (18/8 stainless, 18% chromium 8% nickel; max. 0.08% C)
- steel, low-alloyed, hot rolled: 1.63e7 kg; lognormal variance with pedigree 0.16, pedigree (1,1,5,1,1)
  old reference
  EcoSpold01Location=RER
  properties: carbon content, fossil 0.005, dry mass 1 kg, wet mass 1 kg
  note on carbon content, fossil: Low alloyed steel composition given in Tab. 3.2 ecoinvent v2.2 report 10_partII. Steel assumed to have a C content of 0.5%
- waste reinforced concrete: -4.45267e6, -6.35473e7 kg (2 suppliers, which the file names only by identifier); sum of these -6.8e7 kg; lognormal variance with pedigree 0.12, pedigree (1,1,1,1,1)
  old reference
  EcoSpold01Location=CH
  production volume
    Calculated from the production volume of uranium enrichment centrifuge facility in proportion to the respective output amounts.
  properties: dry mass 0.99418 kg, water content 0.00585407, wet mass 1 kg
- zinc: 33000 kg; lognormal variance with pedigree 0.16, pedigree (1,1,5,1,1)
  EcoSpold01Location=RER
  old reference
  properties: dry mass 1 kg, wet mass 1 kg

## Inputs from nature
All rows: lognormal variance with pedigree 0.16, pedigree (1,1,5,1,1)
- Occupation, industrial area [natural resource, land]: 4.5e6 m2*year
  own estimation
- Transformation, from industrial area [natural resource, land]: 150000 m2
  own estimation
- Transformation, from unspecified [natural resource, land]: 150000 m2
  own estimation
- Transformation, to industrial area [natural resource, land]: 150000 m2
  own estimation
- Transformation, to unspecified [natural resource, land]: 150000 m2
  own estimation

## Sampling procedure
Literature

## Review by Thomas Nemecek 2007-08-24
Passed.
