# pyrethroid-compound production

Dataset: EcoSpold 2, unit process
Geography: RER
Time period: 2000-01-01 to 2022-12-31
Technology level: current
Classification: ISIC rev.4 ecoinvent: 2021:Manufacture of pesticides and other agrochemical products
Classification: EcoSpold01Categories: agricultural means of production/pesticides
Tags: ConvertedDataset
Scenario: Business-as-Usual
System model: Allocation at the point of substitution
Share of production covered: 100 %
Generated by: Jürgen Sutter
Published in: Nemecek, T. 2007
Database: ecoinvent
isCopyrightProtected: true

## General comment
This dataset represents the production of pyrethroid-compounds (1 kg of active ingredient). Raw materials are modelled with a stoichiometric calculation. Energy consumption is modelled with data from a similar process. The emissions are estimated. Infrastructure is included with a default value.
This dataset represents the production of pyrethroid-compounds (1 kg of active ingredient). Raw materials are modelled with a stoichiometric calculation. Energy consumption is modelled with data from a similar process. The emissions are estimated. Infrastructure is included with a default value.

## Included activities start
From reception of precursors (acetonitrile, ammonia, bromine, butene, carbon tetrachloride, chlorine, ethanol, formaldehyde, hydrochloric acid, hydrogen cyanide, hydrogen fluoride, phenol, sodium hydroxide, toluene, water decarbonised, and "water, salt, sole") at the factory gate.

## Included activities end
This activity ends with pyrethroid-compounds at the factory gate. The dataset includes the input materials, energy uses, infrastructure and emissions. The dataset doesn't include emulsives, additives etc.

## Geography
The inventory is modelled for Europe.

## Technology
Pyrethroids are synthetic insecticides (typically cyclopropane carboxylates) structurally similar to pyrethrins, which are naturally occurring insecticidal compounds. They are produced by an esterification of chrysanthemic acid and an alcohol, e. g. PCBA.

The dataset sulfonyl]urea-compounds was calculated from the arithmetic mean of all inputs and outputs of the production of alpha-cypermethrin, beta-cyfluthrin, cypermethrin, and lambda-cyhalothrin.

alpha-Cypermethrin is produced in five steps from acetic acid:
C7H8 + Br2 → C7H7Br + HBr
C7H7Br + C6H6O → C13H12O + HBr
C13H12O + Br2 → C13H11BrO + HBr
C13H11BrO + C6H12N4 → C19H23BrNO4
C19H23BrNO4 + H2O → C13H10O2 + HBr + C6H12N4 + H2
C13H10O2 + HCN → C14H11NO2
C14H11NO2 + C10H14Cl2O2 → C22H19Cl2NO3 + C2H6O
Precursors that are used for the alpha-cypermethrin production are 2,2,-dimethyl-3-(2,2,-dichloro vinyl) cyclopropane carboxylic acid ethyl ester (DV acid ester) (C10H14Cl2O2), hexamine (C6H12N4), methyl-2-butene-1-ol (C5H10O), and sodium ethoxide (C2H5ONa).

beta-Cyfluthrin is produced in eight steps from toluene:
C7H8 + 2 Br2 → C7H6Br2 + 2 HBr
C7H8 + HF → C7H6BrF + HBr
C7H6BrF + C6H6O → C13H11FO + HBr
C13H11FO + Br2 → C13H10BrFO + HBr
C13H10BrFO + C6H12N4 → C19H22BrFNO4
C19H22BrFNO4 + H2O → C13H9FO2 + HBr + C6H12N4 + H2
C13H9FO2 + HCN → C14H10FNO2
C14H10FNO2 + C10H14Cl2O2 → C22H18Cl2FNO3 + C2H6O
Precursors that are used for the beta-cyfluthrin production are 2,2,-dimethyl-3-(2,2,-dichloro vinyl) cyclopropane carboxylic acid ethyl ester (DV acid ester) (C10H14Cl2O2), hexamine (C6H12N4), methyl-2-butene-1-ol (C5H10O), and sodium ethoxide (C2H5ONa).

Cypermethrin is produced in five steps from acetic acid:
C7H8 + Br2 → C7H7Br + HBr
C7H7Br + C6H6O → C13H12O + HBr
C13H12O + Br2 → C13H11BrO + HBr
C13H11BeO + C6H12N4 → C19H23BrNO4
C19H23BrNO4 + H2O → C13H10O2 + HBr + C6H12N4 + H2
C13H10O2 + HCN → C14H11NO2
C14H11NO2 + C10H14Cl2O2 → C22H19Cl2NO3 + C2H6O
Precursors that are used for the cypermethrin production are 2,2,-dimethyl-3-(2,2,-dichloro vinyl) cyclopropane carboxylic acid ethyl ester (DV acid ester) (C10H14Cl2O2), hexamine (C6H12N4), methyl-2-butene-1-ol (C5H10O), and sodium ethoxide (C2H5ONa).

lambda-Cyhalothrin is produced in seven steps from toluene:
C7H8 + Br2 → C7H7Br + HBr
C7H7Br + C6H6O → C13H12O + HBr
C13H12O + Br2 → C13H11BrO + HBr
C13H11BeO + C6H12N4 → C19H23BrNO4
C19H23BrNO4 + H2O → C13H10O2 + HBr + C6H12N4 + H2
C13H10O2 + HCN → C14H11NO2
C14H11NO2 + C9H9Cl2F3O → C23H19ClF3NO3 + HCl
Precursors that are used for the lambda-cyhalothrin production are hexamine (C6H12N4), intermediate 6 (C9H9Cl2F3O), methyl-2-butene-1-ol (C5H10O), potassium tert-butoxide (C4H9OK), sodium ethoxide (C2H5ONa), thionyl chloride (SOCl2), and 1,1,1-trichloro-2,2,2-trifluoroethane (C2Cl3F3).

Precursors:

2,2,-Dimethyl-3-(2,2,-dichloro vinyl) cyclopropane carboxylic acid ethyl ester (DV acid ester) (C10H14Cl2O2) is produced in five steps from acetonitrile and ethanol:
C2H3N + C2H6O + HCl → C4H10ClNO
C4H10ClNO + 2 C2H5ONa + HCl → C8H18O3 + 2 NaCl + NH3
C8H18O3 + C5H10O → C9H16O2 + 2 C2H6O
C9H16O2 + CCl4 → C10H16Cl4O2
C10H16Cl4O2 + C2H5ONa → C10H14Cl2O2 + NaCl + HCl + C2H6O

Hexamine (C6H12N4) is produced from formaldehyde and ammonia:
6 CH2O + 6 NH3 → C6H12N4 + 6 H2O

Intermediate 6 (C9H9Cl2F3O) is produced in six steps from acetonitrile:
C2H3N + C2H6O + HCl → C4H10ClNO
C4H10ClNO + 2 C2H5ONa + HCl → C8H18O3 + 2 NaCl + NH3
C8H18O3 + C5H10O → C9H16O2 + 2 C2H6O
C9H16O2 + C2Cl3F3 → C11H16Cl3F3O2
C11H16Cl3F3O2 + C4H9OK → C11H14ClF3O2 + HCl + C4H10O + KCl
C11H14ClF3O2 + SOCl2 + H2O → C9H9Cl2F3O + C2H6O + SO2 + HCl

Methyl-2-butene-1-ol (C5H10O) is produced in two steps from formaldehyde:
3 CH2O → C3H6O3
C3H6O3 + C4H8 → C5H10O + 2 CH4O

Potassium tert-butoxide (C4H9OK) is produced from tert-butanol and potassium hydroxide:
C4H10O + KOH → C4H9OK + H2O

Sodium ethoxide (C2H5ONa) is produced from ethanol and sodium hydroxide:
C2H6O + NaOH → C2H5ONa + H2O
Thionyl chloride (SOCl2) is produced in two steps from sulphur:
S + Cl2 → SCl2
SCl2 + SO2 + Cl2 → 2 SOCl2

1,1,1-Trichloro-2,2,2-trifluoroethane (C2Cl3F3) is produced in two steps from ethane:
C2H6 + 6 Cl2 → C2Cl6 + 6 HCl
C2Cl6 + 3 HF → C2Cl3F3 + 3 HCl

## Time period
Time of publications

## Parameters
- fraction, cooling water, cooling pond system, to air: 0.032 dimensionless; name fraction_CW_CP_to_air; lognormal variance with pedigree 0.0413, pedigree (2,3,1,3,1)
  Calculated based on literature value (Scown, C.D., 2011, Water Footprint of U.S. Transportation Fuels and supplying information of the article) (Vionnet, S., Quantis Water Database - Technical Report, 2012).
- fraction, cooling water, once-through system, to air: 0.004 dimensionless; name fraction_CW_OT_to_air; lognormal variance with pedigree 0.0413, pedigree (2,3,1,3,1)
  (same comment as for fraction, cooling water, cooling pond system, to air)
- fraction, cooling water, recirculating system, to air: 0.771 dimensionless; name fraction_CW_R_to_air; lognormal variance with pedigree 0.0413, pedigree (2,3,1,3,1)
  (same comment as for fraction, cooling water, cooling pond system, to air)
- fraction, cooling water, to air: 0.3875 dimensionless; name fraction_CW_to_air; = (0.5*fraction_CW_OT_to_air)+(0.5*fraction_CW_R_to_air); lognormal variance with pedigree 0.092025, pedigree (4,4,3,2,4)
  Calculated value based on literature value (see comments of the other parametres present in this dataset) and expert opinion. In the case when no industry/literature data are available about the type of cooling or directly fraction, cooling water, to air specific for the process a default assumption is applied. It is assumed that the once-through cooling system is used in 50% of all cases and recirculating system is used in another 50% of all cases.
- fraction, process water, to air: 0.205 dimensionless; name fraction_PW_to_air; lognormal variance with pedigree 0.092025, pedigree (4,4,3,2,4)
  Literature value (Statistics Canada, 2007 & Shaffer, K.H., 2008, Consumptive water use in the Great Lakes Basin, USGS) (Vionnet, S., Quantis Water Database - Technical Report, 2012).
- fraction, water, decarbonised, to air: 0.3875 dimensionless; name fraction_WDC_to_air; = fraction_CW_to_air; lognormal variance with pedigree 0.092025, pedigree (4,4,3,2,4)
  Calculated value. See comments in the other parametres present in this dataset. Decarbonised water is considered to be always used as cooling water, thus cooling water fractions to air are applied to all carbonised water input flows to calculate the amount of water consumed in the processes.

## Reference product
- pyrethroid-compound: 1 kg; By-product classification allocatable product; CPC 34661: Insecticides
  EcoSpold01Location=RER
  Pyrethroids are inseticides that act as sodium channel modulators.
  production volume 1.55346e6 kg
    Unknown
    The addition of the consumption volumes in the US in 2002 (from USGS, 2002 Pesticide use Maps) of the pyrethroid-compounds bifenthrin, cyfluthrin, cypermethrin, deltamethrin, esfenvalerate, fenpropathrin, lambdacyhalothrin, permethrin, tefluthrin, tralomethrin, z-cypermethrin has been used to estimate the production volumes of this type of pesticide in the Europe. For that, it has been extrapolated to a Global production mix using the ha of Arable land and Permanent crops of US versus the ha of Arable land and Permanent crops in the Europe in 2002 (299/179 million ha; FAOSTAT).
  property carbon content, fossil 0.623
    C content of pyrethroid-compounds was calculated as an unweigthed average of C content of the substances: cypermethrin, alpha-cypermethrin,beta-cyfluthrin, lambdacyhalothrin. Those substances are classified as pyrethroid-compounds in Tab 2.25, Sutter 2010
  property price 5.78125 EUR2005
    Calculated based on inputs: The price of the product has been calculated as a sum of the values of the material and energy inputs for this product. This value is therefore a rough estimation. It may underestimate the real price since there are additional expenses when producing any product. These expences can include for example labour costs, treatment of waste materials and profit for the producer. Please consider carefully whether this level of data quality is acceptable for your application.
  properties: carbon allocation 0.623 kg, carbon content 0.623, carbon content, non-fossil 0, dry mass 1 kg, water content 0, water in wet mass 0 kg, wet mass 1 kg

## Inputs from technosphere
- acetonitrile: 0.051882 kg; source Unger T A 1996; lognormal variance with pedigree 0.044, pedigree (4,5,4,1,1)
  Stoichiometric calculation, assuming an efficiency of 95% per reaction step.
  EcoSpold01Location=RER
  Uncertainty: Stoechiometric calculation
  properties: carbon content, fossil 0.585366, dry mass 1 kg, heating value, net 26.59 MJ, wet mass 1 kg
- ammonia, anhydrous, liquid: 0.37407 kg; source Eller K. 2009; lognormal variance with pedigree 0.044, pedigree (4,5,4,1,1)
  EcoSpold01Location=RER
  Stoichiometric calculation, assuming an efficiency of 95% per reaction step.
  Further references:
  Reuss et al. 2000. Günther Reuss, Walter Disteldorf, Armin Otto Gamer, Albrecht Hilt: Formaldehyde. In: Ullmann's Encyclopedia of Industrial Chemistry, Seventh Edition, 2009 Electronic Release (ed. Fiedler E., Grossmann G., Kersebohm D., Weiss G. and Witte C.). 7 th Electronic Release Edition. Wiley InterScience, New York, Article Online Posting Date: June 15, 2000. Online-Version under: DOI: 10.1002/14356007.a11_619
  Uncertainty: Stoechiometric calculation
  properties: dry mass 1 kg, wet mass 1 kg
- butene, mixed: 0.06732 kg; source Unger T A 1996; lognormal variance with pedigree 0.044, pedigree (4,5,4,1,1)
  Stoichiometric calculation, assuming an efficiency of 95% per reaction step.
  Further references:
  Eller et al. 2000. Karsten Eller, Erhard Henkes, Roland Rossbacher, Hartmut Höke: Amines, Aliphatic. In: Ullmann's Encyclopedia of Industrial Chemistry, Seventh Edition, 2009 Electronic Release (ed. Fiedler E., Grossmann G., Kersebohm D., Weiss G. and Witte C.). 7 th Electronic Release Edition. Wiley InterScience, New York, Article Online Posting Date: June 15, 2000. Online-Version under: DOI: 10.1002/14356007.a02_001
  EcoSpold01Location=RER
  Uncertainty: Stoechiometric calculation
  properties: carbon content, fossil 0.857143, dry mass 1 kg, heating value, net 45.3 MJ, wet mass 1 kg
  note on carbon content, fossil: With mixed butenes, the four isomers 1-butene, cis-2-butene, trans-2-butene and isobutene are summed up. They are unsaturated olefinic hydrocarbons with the formula C4H8 (ecoinvent v2.2 report 11_II). MW=56
  note on heating value, net: Indicative value. Reference: Fuels - Higher and Lower Calorific Values, available at: https://www.engineeringtoolbox.com/fuels-higher-calorific-values-d_169.html
- carbon tetrachloride: 0.26217 kg; source Unger T A 1996; lognormal variance with pedigree 0.044, pedigree (4,5,4,1,1)
  EcoSpold01Location=RER
  Stoichiometric calculation, assuming an efficiency of 95% per reaction step.
  Uncertainty: Stoechiometric calculation
  properties: carbon content, fossil 0.0789474, dry mass 1 kg, heating value, net 2.37 MJ, wet mass 1 kg
- chemical factory, organics: 3.3018e-9 unit; lognormal variance with pedigree 0.448, pedigree (4,5,5,5,5)
  Estimation, based on a production capacity of 50,000 t per year and a plant life time of 50 years, therefore an amount of 4X10-10 units per kg of produced chemical is aded to the unit process of the respective chemical. The amount is accounted for each production step. This might be an overestimation in some multistep syntheses.
  EcoSpold01Location=RER
  Uncertainty: Estimation
- chlorine, liquid: 0.8299 kg; source Unger T A 1996; lognormal variance with pedigree 0.044, pedigree (4,5,4,1,1)
  Stoichiometric calculation, assuming an efficiency of 95% per reaction step.
  Further references:
  Kim et al. 2003. Kim S., Overcash M.: Energy in chemical manufacturing processes: gate-to-gate information for life cycle assessment. In: Journal of Chemical Technology & Biotechnology vol. 78, no. 9: 995-1005(11). 2003
  EcoSpold01Location=RER
  Uncertainty: Stoechiometric calculation
  properties: dry mass 1 kg, wet mass 1 kg
- electricity, medium voltage: 3.31169 kWh; source Gendorf 2000; lognormal variance with pedigree 0.044, pedigree (4,5,4,1,1)
  Estimation, assuming a default value, originated from calculation of avarage consumption of electricity and heat per kg of product (3.2 MJ kg-1), and a resulting amount of electricity of 0,333 kW for every reaction step per kg reaction product, considering that the demand is made up of a mix that inlcudes 38% electricity. Additionally, reaction steps are approximated with energy consumption data, assuming that inventory flows can be estimated using process data for basic operation steps, available for specific organic chemicals.
  EcoSpold01Location=UCTE
  Uncertainty: Estimation
- ethanol, without water, in 99.7% solution state, from ethylene: 0.25397 kg; source Unger T A 1996; lognormal variance with pedigree 0.044, pedigree (4,5,4,1,1)
  EcoSpold01Location=RER
  Stoichiometric calculation, assuming an efficiency of 95% per reaction step.
  Further references:
  Kim et al. 2003. Kim S., Overcash M.: Energy in chemical manufacturing processes: gate-to-gate information for life cycle assessment. In: Journal of Chemical Technology & Biotechnology vol. 78, no. 9: 995-1005(11). 2003
  Uncertainty: Stoechiometric calculation
  properties: carbon content, fossil 0.521739, dry mass 1 kg, heating value, net 28.1 MJ, wet mass 1 kg
  note on heating value, net: Based on literature, page 275, Report 17: Jungbluth, N., Chudacoff, M., Dauriat, A., Dinkel, F., Doka, G., Faist Emmenegger, M., Gnansounou, E., Kljun, N., Schleiss, K., Spielmann, M., Stettler, C., Sutter, J. 2007: Life Cycle Inventories of Bioenergy. ecoinvent report No. 17, Swiss Centre for Life Cycle Inventories, Dübendorf, CH.
- formaldehyde: 0.81069 kg; source Unger T A 1996; lognormal variance with pedigree 0.044, pedigree (4,5,4,1,1)
  EcoSpold01Location=RER
  Stoichiometric calculation, assuming an efficiency of 95% per reaction step.
  Further references:
  Eller et al. 2000. Karsten Eller, Erhard Henkes, Roland Rossbacher, Hartmut Höke: Amines, Aliphatic. In: Ullmann's Encyclopedia of Industrial Chemistry, Seventh Edition, 2009 Electronic Release (ed. Fiedler E., Grossmann G., Kersebohm D., Weiss G. and Witte C.). 7 th Electronic Release Edition. Wiley InterScience, New York, Article Online Posting Date: June 15, 2000. Online-Version under: DOI: 10.1002/14356007.a02_001
  Reuss et al. 2000. Günther Reuss, Walter Disteldorf, Armin Otto Gamer, Albrecht Hilt: Formaldehyde. In: Ullmann's Encyclopedia of Industrial Chemistry, Seventh Edition, 2009 Electronic Release (ed. Fiedler E., Grossmann G., Kersebohm D., Weiss G. and Witte C.). 7 th Electronic Release Edition. Wiley InterScience, New York, Article Online Posting Date: June 15, 2000. Online-Version under: DOI: 10.1002/14356007.a11_619
  Uncertainty: Stoechiometric calculation
  properties: carbon content, fossil 0.4, dry mass 1 kg, heating value, net 20.19 MJ, wet mass 1 kg
- heat, district or industrial, natural gas: 52.7288 MJ; source Gendorf 2000; lognormal variance with pedigree 0.044, pedigree (4,5,4,1,1)
  Estimation, assuming a default value, originated from calculation of avarage consumption of electricity and heat per kg of product (3.2 MJ kg-1), and a resulting amount of heat of 2 MJ for every reaction step per kg reaction product, considering that the demand is made up of a mix that includes 50% natural gas. Additionally, reaction steps are approximated with energy consumption data, assuming that inventory flows can be estimated using process data for basic operation steps, available for specific organic chemicals.
  Uncertainty: Estimation
  properties: heating value, net 1 MJ
- heat, district or industrial, other than natural gas: 29.431 MJ; source Gendorf 2000; lognormal variance with pedigree 0.044, pedigree (4,5,4,1,1)
  Estimation, assuming a default value, originated from calculation of avarage consumption of electricity and heat per kg of product (3.2 MJ kg-1), and a resulting amount of heat of 2 MJ for every reaction step per kg reaction product, considering that the demand is made up of a mix that inlcudes 12% steam from external energy sources. Additionally, reaction steps are approximated with energy consumption data, assuming that inventory flows can be estimated using process data for basic operation steps, available for specific organic chemicals.
  Uncertainty: Estimation
  properties: heating value, net 1 MJ
- hydrochloric acid, without water, in 30% solution state: 0.10355 kg; source Unger T A 1996; lognormal variance with pedigree 0.044, pedigree (4,5,4,1,1)
  Stoichiometric calculation, assuming an efficiency of 100%.
  EcoSpold01Location=RER
  Uncertainty: Stoechiometric calculation
  properties: dry mass 1 kg, heating value, net 3.32 MJ, wet mass 1 kg
- hydrogen cyanide: 0.084896 kg; source Unger T A 1996; lognormal variance with pedigree 0.044, pedigree (4,5,4,1,1)
  (same comment as for carbon tetrachloride)
  properties: carbon content, fossil 0.444444, dry mass 1 kg, heating value, net 17.95 MJ, wet mass 1 kg
- hydrogen fluoride: 0.016535 kg; source Unger T A 1996; lognormal variance with pedigree 0.044, pedigree (4,5,4,1,1)
  Stoichiometric calculation, assuming an efficiency of 95% per reaction step.
  EcoSpold01Location=GLO
  Uncertainty: Stoechiometric calculation
  properties: dry mass 1 kg, heating value, net 6.06 MJ, wet mass 1 kg
- phenol: 0.36288 kg; source Unger T A 1996; lognormal variance with pedigree 0.044, pedigree (4,5,4,1,1)
  (same comment as for carbon tetrachloride)
  properties: carbon content, fossil 0.765957, dry mass 1 kg, heating value, net 30.93 MJ, wet mass 1 kg
- sodium hydroxide, without water, in 50% solution state: 0.86578 kg; source Kim S. 2003; lognormal variance with pedigree 0.044, pedigree (4,5,4,1,1)
  (same comment as for hydrochloric acid, without water, in 30% solution state)
  properties: dry mass 1 kg, heating value, net 3.03 MJ, wet mass 1 kg
- toluene, liquid: 0.37785 kg; source Unger T A 1996; lognormal variance with pedigree 0.044, pedigree (4,5,4,1,1)
  (same comment as for acetonitrile)
  properties: carbon content, fossil 0.913043, dry mass 1 kg, heating value, net 38.17 MJ, wet mass 1 kg
- water, decarbonised: 0.0059998, 1.88977e-5, 0.0297617, 0.0197285, 0.00108913 kg (5 suppliers, which the file names only by identifier); sum of these 0.056598 kg; source Unger T A 1996; lognormal variance with pedigree 0.044, pedigree (4,5,4,1,1)
  EcoSpold01Location=RER
  Stoichiometric calculation, assuming an efficiency of 100%.
  Uncertainty: Stoechiometric calculation
  properties: wet mass 1 kg

## Inputs from nature
- Bromine [natural resource, in water]: 1.3832 kg; name bromine_input; source Unger T A 1996; lognormal variance with pedigree 0.044, pedigree (4,5,4,1,1)
  0.23% Br in water; Stoichiometric calculation, assuming an efficiency of 95% per reaction step.
  Uncertainty: Stoechiometric calculation
- Water, cooling, unspecified natural origin [natural resource, in water]: 0.19811 m3; name water_cooling_UNO_input; source Gendorf 2000; lognormal variance with pedigree 0.044, pedigree (4,5,4,1,1)
  Estimation (24 kg cooling water per kg produced chemical per step).
  Uncertainty: Estimation
- Water, salt, sole [natural resource, in water]: 0.601391 m3; name water_salt_sole_input; = ((bromine_input/0.0023))/1000; lognormal variance with pedigree 0.044, pedigree (4,5,4,1,1)
  There is an intermediate containing bromine in this process and this input is used as an input in the bromine production.
  The concentration of bromine in water, salt, sole is 0.23% = 0.0023kg/kg. Cross-referenced: 0.25% (Ullmann's encyclopedia), 0.4% (USGS). The concentration of iodine in water, salt, sole is 0.03% = 0.0003kg/kg. Cross-referenced: 0.015% - 0.12% (Ullmann's encyclopedia).
  There is an intermediate containing bromine in this process and this input is used as an input in the bromine production.
  The concentration of bromine in water, salt, sole is 0.23% = 0.0023kg/kg. Cross-referenced: 0.25% (Ullmann's encyclopedia), 0.4% (USGS). The concentration of iodine in water, salt, sole is 0.03% = 0.0003kg/kg. Cross-referenced: 0.015% - 0.12% (Ullmann's encyclopedia).
  Uncertainty: Stoechiometric calculation

## Emissions to nature
- 2-Methyl-1-propanol [air, urban air close to ground]: 0.00013464 kg; lognormal variance with pedigree 0.188, pedigree (4,5,5,5,5)
  Estimation, based on the assumption that 0.2% of volatile input materials is emitted to air occurring from the purge vent, the destillation vent and fugitive emission sources.
  Uncertainty: Estimation
- Ammonia [air, urban air close to ground]: 0.00074814 kg; lognormal variance with pedigree 0.218, pedigree (4,5,5,5,5)
  (same comment as for 2-Methyl-1-propanol)
- Carbon dioxide, fossil [air, urban air close to ground]: 1.028 kg; lognormal variance with pedigree 0.1786, pedigree (4,5,5,5,5)
  Estimation, based on the assumption that 0.2% of volatile input materials is emitted to air occurring from the purge vent, the destillation vent and fugitive emission sources. Remaining gases like CH4 or CO are oxidated to CO2. The carbon contained in the removed carbon compounds from wastewater treatment was accounted as CO2 emissions to air (assuming a removal efficiency of 90%).
  Uncertainty: Estimation
- Ethanol [air, urban air close to ground]: 0.00050794 kg; lognormal variance with pedigree 0.188, pedigree (4,5,5,5,5)
  (same comment as for 2-Methyl-1-propanol)
- Formaldehyde [air, urban air close to ground]: 0.0016214 kg; lognormal variance with pedigree 0.188, pedigree (4,5,5,5,5)
  (same comment as for 2-Methyl-1-propanol)
- Hydrogen [air, urban air close to ground]: 1.2577e-5 kg; lognormal variance with pedigree 0.188, pedigree (4,5,5,5,5)
  (same comment as for 2-Methyl-1-propanol)
- Phenol [air, urban air close to ground]: 0.00072575 kg; lognormal variance with pedigree 0.188, pedigree (4,5,5,5,5)
  (same comment as for 2-Methyl-1-propanol)
- Toluene [air, urban air close to ground]: 0.0007557 kg; lognormal variance with pedigree 0.188, pedigree (4,5,5,5,5)
  (same comment as for 2-Methyl-1-propanol)
- Water [air, unspecified]: 0.200075 m3; name water_to_air_unspecified; = (water_decarbonised_input/1000*fraction_WDC_to_air)+(water_cooling_UNO_input*fraction_CW_to_air)+(water_salt_sole_input*fraction_PW_to_air); lognormal variance with pedigree 0.0487, pedigree (2,2,4,1,1)
  Calculated value based on literature values and expert opinion. See comments in the parametres' comment field.
  property fraction, origin: fresh water 0.000109618; name fraction_origin_fresh_water
  property fraction, origin: salt water 0.616196; name fraction_origin_salt_water
  property fraction, origin: unspecified 0.383695; name fraction_origin_unspecified
- 2-Methyl-1-propanol [water, surface water]: 0.00032314 kg; lognormal variance with pedigree 0.448, pedigree (4,5,5,5,5)
  Estimation, assuming that the remaining amount of unreacted input materials leave the production process with the wastewater, wich is further treated in an internal wastewater plant.
  Uncertainty: Estimation
- Ammonium [water, surface water]: 0.0017955 kg; lognormal variance with pedigree 0.188, pedigree (4,5,5,5,5)
  Estimation, assuming that the remaining amount of unreacted input materials leave the production process with the wastewater, wich is further treated in an internal wastewater plant. For the nitrogen containing compounds within the wastewater a removal efficiency of 50% was assumed. The nitrogen emitted to air (N2) is neglected.
  Uncertainty: Estimation
- Bromide [water, surface water]: 1.3772 kg; lognormal variance with pedigree 0.798, pedigree (4,5,5,5,5)
  (same comment as for 2-Methyl-1-propanol)
- Chloride [water, surface water]: 0.070672 kg; lognormal variance with pedigree 0.448, pedigree (4,5,5,5,5)
  (same comment as for 2-Methyl-1-propanol)
- Ethanol [water, surface water]: 0.0062351 kg; lognormal variance with pedigree 0.448, pedigree (4,5,5,5,5)
  (same comment as for 2-Methyl-1-propanol)
- Fluoride [water, surface water]: 0.0038238 kg; lognormal variance with pedigree 0.188, pedigree (4,5,5,5,5)
  (same comment as for 2-Methyl-1-propanol)
- Formaldehyde [water, surface water]: 0.0073753 kg; lognormal variance with pedigree 0.448, pedigree (4,5,5,5,5)
  (same comment as for 2-Methyl-1-propanol)
- Phenol [water, surface water]: 0.0017418 kg; lognormal variance with pedigree 0.448, pedigree (4,5,5,5,5)
  (same comment as for 2-Methyl-1-propanol)
- Sodium I [water, surface water]: 0.3539 kg; lognormal variance with pedigree 0.798, pedigree (4,5,5,5,5)
  (same comment as for 2-Methyl-1-propanol)
- Toluene [water, surface water]: 0.0018137 kg; lognormal variance with pedigree 0.448, pedigree (4,5,5,5,5)
  (same comment as for 2-Methyl-1-propanol)
- Water [water, unspecified]: 0.599483 m3; name water_to_water_unspecified; = (water_decarbonised_input/1000)*(1-fraction_WDC_to_air)+water_cooling_UNO_input*(1-fraction_CW_to_air)+water_salt_sole_input*(1-fraction_PW_to_air); lognormal variance with pedigree 0.0487, pedigree (2,2,4,1,1)
  (same comment as for Water)
  property carbon content, fossil 0; name C_content_fossil
  property carbon content, non-fossil 0; name C_content_non_fossil
  property fraction, origin: fresh water 5.78269e-5; name fraction_origin_fresh_water_Ww
  property fraction, origin: salt water 0.797531; name fraction_origin_salt_water_Ww
  property fraction, origin: unspecified 0.202412; name fraction_origin_unspecified_Ww
  property water in wet mass 1000 kg; name WWM

## Sampling procedure
Literature data

## Review by Thomas Nemecek 2010-03-11
Passed.
none

## Review by Roland Hischier 2011-11-14
Transfer of documentation done.
