# graphic paper production, 100% recycled

Dataset: EcoSpold 2, unit process
Geography: RoW
Time period: 2008-01-01 to 2022-12-31
Technology level: current
Classification: ISIC rev.4 ecoinvent: 1701:Manufacture of pulp, paper and paperboard
Scenario: Business-as-Usual
System model: Allocation at the point of substitution
Share of production covered: 2.8 %
Generated by: Thomas Kägi
Database: ecoinvent
isCopyrightProtected: false

## General comment
This module is an extrapolation of the European graphical recycling paper production based on confidential primary data from 9 common graphical recycling paper (weighted average) on behalf of a project funded by the Swiss Federal Office for the Environment FOEN: The total annual production is 1'242'000 metric tons which represents about 10.4% of the annual production of the graphical recycling papers (without newspaper) in the EU (approximately 2.8% of World production).

## Included activities start
Service starting with the input of labour, raw materials (e.g. unsorted waste paper, lime, other chemicals) and energy

## Included activities end
This module includes the production of recycled graphical paper - including collected but unsorted waste paper, deinking of pulp, paper production, energy production on-site, internal waste water treatment and transports of the auxiliaries to the paper mill. Not included are the infrastructure, transport of input materials since this is supposed to be included in the market activities.

## Technology
Average of present used technology

## Time period
Data have been collected for the years 2008-2010

## Reference product
- graphic paper, 100% recycled: 1 kg; name paper; By-product classification allocatable product; CPC 32129: Other uncoated paper and paperboard, of a kind used for writing, printing or other graphic purposes, and punch[…]
  production volume 3.21e10 kg
    estimation based on CEPI.org
  property price 0.0976 EUR2005
    Export prices for the World+ according to: http://faostat.fao.org/site/626/DesktopDefault.aspx?PageID=626#ancor downloaded 27 April 2009; calculated as export value divided by export volume.
  properties: carbon allocation 0.409176 kg, carbon content 0.43299, carbon content, fossil 3e-5, carbon content, non-fossil 0.43296, dry mass 0.945 kg, heating value, net 14.11 MJ, water content 0.0582011, water in wet mass 0.055 kg, wet mass 1 kg

## Inputs from technosphere
- acrylic dispersion, with water, in 58% solution state: 8.40353e-6 kg
- acrylic varnish, with water, in 53% solution state: 2.76116e-6 kg
- aluminium scrap, post-consumer: -0.000175839 kg
- aluminium, wrought alloy: 0.000175839 kg
- chemical, inorganic: 8.00818e-7 kg
- chemical, organic: 8.00818e-7 kg
- chimney: 2.0373e-9 m
- corrugated board box: 0.000185463, 0.000430478, 6.9085e-6 kg (3 suppliers, which the file names only by identifier); sum of these 0.00062285 kg
- diesel, low-sulfur: 2.32879e-9, 5.6125e-8, 1.05469e-9, 1.55923e-10, 4.70036e-9, 2.35096e-9 kg (6 suppliers, which the file names only by identifier); sum of these 6.67157e-8 kg
- electricity, low voltage: 0.00014372, 0.000284819, 0.00273599, 4.88059e-5, 0.000977834, 8.87555e-6, 0.000677794, 0.000199594 kWh (8 suppliers, which the file names only by identifier); sum of these 0.00507743 kWh
- electricity, medium voltage: 4.46616e-5, 1.39358e-5, 4.15009e-7, 2.11755e-6, 0.000127863, 6.9939e-6 kWh (6 suppliers, which the file names only by identifier); sum of these 0.000195986 kWh
- ethylene glycol monoethyl ether: 3.70038e-6 kg
- ethylene vinyl acetate copolymer: 6.35982e-6 kg
- extrusion, plastic film: 3.76398e-5 kg
- hazardous waste, for incineration: -5.33821e-6 kg
- heat, district or industrial, natural gas: 0.00297355, 0.00805177, 0.000132311 MJ (3 suppliers, which the file names only by identifier); sum of these 0.0111576 MJ
- heavy fuel oil: 7.2641e-7, 6.11242e-9, 3.10744e-8, 4.02927e-8, 7.84133e-9, 1.04968e-8 kg (6 suppliers, which the file names only by identifier); sum of these 8.22228e-7 kg
- industrial furnace, 1MW, oil: 1.52799e-10 unit
- industrial furnace, natural gas: 8.50762e-10 unit
- industrial machine, heavy, unspecified: 1.53947e-6 kg
- isopropanol: 1.53947e-5 kg
- kraft paper: 0.00123173 kg
- light fuel oil: 3.75293e-7, 3.72508e-8, 3.58172e-9, 2.66181e-9, 2.47192e-9, 1.84571e-8 kg (6 suppliers, which the file names only by identifier); sum of these 4.39717e-7 kg
- maize starch: 9.34479e-6 kg
- municipal solid waste: -9.98793e-8, -3.59652e-8, -7.06386e-5, -2.51671e-8 kg (4 suppliers, which the file names only by identifier); sum of these -7.07996e-5 kg
- natural gas, high pressure: 6.41956e-8, 2.70972e-8, 1.55193e-7, 4.60554e-8, 2.60539e-6, 2.66291e-7, 2.90679e-8, 8.57751e-10, 1.03216e-7, 1.08389e-7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 m3 (24 suppliers, which the file names only by identifier); sum of these 7.79087e-6 m3
- oil storage, 3000l: 1.90996e-9 unit
- packaging box factory: 1.85418e-12 unit
- packaging film, low density polyethylene: 3.11501e-5 kg
- paper, woodfree, coated: 0.00981589 kg
- polyethylene, high density, granulate: 3.76398e-5 kg
- potato starch: 8.13017e-6 kg
- printing ink, offset, without solvent, in 47.5% solution state: 7.96101e-5 kg
- sheet rolling, aluminium: 0.000175839 kg
- spent solvent mixture: -7.61661e-6, -2.97607e-6 kg (2 suppliers, which the file names only by identifier); sum of these -1.05927e-5 kg
- synthetic rubber: 1.26406e-6 kg
- textile, woven cotton: 1.99142e-6 kg
- thermoforming, with calendering: 2.81059e-6 kg
- waste emulsion paint: -1.81988e-6, -1.71549e-7 kg (2 suppliers, which the file names only by identifier); sum of these -1.99142e-6 kg
- waste paper, unsorted: -0.00139288, -0.00137705 kg (2 suppliers, which the file names only by identifier); sum of these -0.00276993 kg
- waste paperboard, unsorted: -0.000311425, -0.000311425 kg (2 suppliers, which the file names only by identifier); sum of these -0.00062285 kg
- waste plastic, mixture: -2.86416e-7, -1.44731e-9, -3.19326e-9, -2.00507e-6, -1.91372e-8, -7.50591e-9, -7.90434e-9 kg (7 suppliers, which the file names only by identifier); sum of these -2.33067e-6 kg
- white spirit: 2.15385e-5 kg

## Inputs from nature
- Water, unspecified natural origin [natural resource, in water]: 9.44888e-7 m3

## Emissions to nature
- 2-Propanol [air, urban air close to ground]: 1.53947e-5 kg
- Acetaldehyde [air, urban air close to ground]: 5.31132e-12 kg
- Acetic acid [air, urban air close to ground]: 6.56065e-11 kg
- Acetone [air, urban air close to ground]: 5.00748e-12 kg
- Ammonia [air, urban air close to ground]: 3.57743e-12 kg
- Arsenic ion [air, urban air close to ground]: 4.33981e-13 kg
- Benzene [air, urban air close to ground]: 1.21862e-10 kg
- Benzene, ethyl- [air, urban air close to ground]: 6.84287e-7 kg
- Benzo(a)pyrene [air, urban air close to ground]: 4.57863e-15 kg
- Butane [air, urban air close to ground]: 2.19502e-10 kg
- Calcium [air, urban air close to ground]: 3.67215e-12 kg
- Carbon dioxide, fossil [air, urban air close to ground]: 2.12527e-5 kg
- Carbon monoxide, fossil [air, urban air close to ground]: 9.5825e-10 kg
- Chromium III [air, urban air close to ground]: 1.65246e-13 kg
- Chromium VI [air, urban air close to ground]: 1.66915e-15 kg
- Cobalt II [air, urban air close to ground]: 1.10164e-12 kg
- Copper ion [air, urban air close to ground]: 1.56709e-11 kg
- Dinitrogen monoxide [air, urban air close to ground]: 7.00653e-11 kg
- Dioxins, measured as 2,3,7,8-tetrachlorodibenzo-p-dioxin [air, urban air close to ground]: 3.38685e-20 kg
- Ethanol [air, urban air close to ground]: 1.0015e-11 kg
- Formaldehyde [air, urban air close to ground]: 6.48684e-11 kg
- Heptane [air, urban air close to ground]: 6.69458e-6 kg
- Hydrocarbons, aliphatic, alkanes, unspecified [air, urban air close to ground]: 3.04094e-11 kg
- Hydrocarbons, aliphatic, unsaturated [air, urban air close to ground]: 1.0015e-12 kg
- Hydrocarbons, aromatic [air, urban air close to ground]: 5.65894e-12 kg
- Hydrochloric acid [air, urban air close to ground]: 5.01045e-11 kg
- Hydrogen fluoride [air, urban air close to ground]: 1.79701e-12 kg
- Iron ion [air, urban air close to ground]: 2.73742e-11 kg
- Lead II [air, urban air close to ground]: 4.84056e-12 kg
- Mercury II [air, urban air close to ground]: 2.49348e-14 kg
- Methane, fossil [air, urban air close to ground]: 7.29461e-10 kg
- Methanol [air, urban air close to ground]: 7.06196e-7 kg
- Molybdenum VI [air, urban air close to ground]: 2.67066e-13 kg
- Nickel II [air, urban air close to ground]: 1.63577e-11 kg
- Nitrogen oxides [air, urban air close to ground]: 9.85832e-9 kg
- PAH, polycyclic aromatic hydrocarbons [air, urban air close to ground]: 3.07034e-12 kg
- Particulate Matter, < 2.5 um [air, urban air close to ground]: 3.4335e-10 kg
- Particulate Matter, > 10 um [air, urban air close to ground]: 8.01196e-11 kg
- Particulate Matter, > 2.5 um and < 10um [air, urban air close to ground]: 4.00599e-11 kg
- Pentane [air, urban air close to ground]: 3.69154e-10 kg
- Propane [air, urban air close to ground]: 6.22049e-11 kg
- Propionic acid [air, urban air close to ground]: 6.07687e-12 kg
- Propylene oxide [air, urban air close to ground]: 1.28525e-6 kg
- Selenium IV [air, urban air close to ground]: 4.00599e-13 kg
- Sodium [air, urban air close to ground]: 2.50375e-11 kg
- Sulfur dioxide [air, urban air close to ground]: 1.4333e-8 kg
- Toluene [air, urban air close to ground]: 6.04552e-7 kg
- Vanadium V [air, urban air close to ground]: 3.33832e-11 kg
- Water [air, non-urban air or from high stacks]: 5.63299e-7 m3
- Xylene [air, urban air close to ground]: 6.04489e-7 kg
- Zinc II [air, urban air close to ground]: 1.69728e-11 kg
- BOD5, Biological Oxygen Demand [water, surface water]: 6.65602e-9 kg
- COD, Chemical Oxygen Demand [water, unspecified]: 5.33446e-7 kg
- DOC, Dissolved Organic Carbon [water, unspecified]: 1.97573e-7 kg
- TOC, Total Organic Carbon [water, unspecified]: 1.97573e-7 kg
- Water [water, unspecified]: 3.81589e-7 m3

## Sampling procedure
Primary data for the production process were collected for each of the 9 recycled graphical paper. Mass balance of paper materials and energy balance for the energy demand were done for each paper individually. The average data was then weighted according to their respective production volume

## Extrapolations
This module is an extrapolation of the European graphical recycling paper production based on the weighted average of 9 common graphical recycling paper. According to CEPI.org, the production volume corresponds to 10.4% of the European graphical recycling paper production and approximately to 2.8% of the World paper production.

## Review by Bo Weidema 2011-12-21
The author has used input of electricity also for the amount of electricity generated by the on-site co-generation plants. The author complains that this is wrong, since he has information about how much electricity they take from the grid and how much they produced in paper mill cogen plants (based on coal, lignite, wood and gas) and that this information is now lost and the inventory less precise than it could have been. It is unclear why the author did not add the fuel inputs and emissions or add direct links to the relevant cogen plants, or at least add this information as a note rather than complaining about data loss.

## Review by Bo Weidema 2012-09-18
passed. revision of some names and invalid formulas.

## Review by Emilia Moreno Ruiz 2013-02-08
Activity Links (heat) were corrected so to be linked to the geography GLO
