# electric arc furnace secondary metallurgy slag to market for electric arc furnace secondary metallurgy slag for recovery

Dataset: EcoSpold 2, unit process
Geography: RER
Time period: 2020-01-01 to 2025-12-31
Technology level: current
Classification: ISIC rev.4 ecoinvent: 3821:Treatment and disposal of non-hazardous waste
Scenario: Business-as-Usual
System model: Allocation at the point of substitution
Generated by: Avraam Symeonidis
Database: ecoinvent
isCopyrightProtected: true

## General comment
This is a renaming activity. Its purpose is to link 'electric arc furnace secondary metallurgy slag' to the 'market for electric arc furnace secondary metallurgy slag, for recovery'. This represents the share of electric arc furnace secondary metallurgy slag that is recovered for use via internal (in iron and steelmaking) or external routes (e.g. cement making).Through this renaming, the by-product classification of the electric arc furnace secondary metallurgy slag is changed from 'waste' to 'recyclable material'.

## Included activities start
Activity starts with the reception of 'electric arc furnace secondary metallurgy slag'.

## Included activities end
Activity ends with the 'electric arc furnace secondary metallurgy slag, for recovery' being ready for transportation.

## Reference product
- electric arc furnace secondary metallurgy slag, for recovery: 1 kg; name BP; By-product classification Recyclable; CPC 39310: Slag, dross, scalings and other waste from the manufacture of iron or steel
  production volume 1.51214e8 kg
    Calculated based on the production volume of the reference product.
  property aluminium content 0.0792965
    The value of 'aluminium content' is documented in Turner & Symeonidis, 2020. Reference: Turner David & Symeonidis Avraam, 2020, Life cycle inventories of the treatment of iron and steelmaking by-products, ecoinvent association, Zürich, Switzerland
  property arsenic content 1.96985e-6
    The value of 'arsenic content' is documented in Turner & Symeonidis, 2020. Reference: Turner David & Symeonidis Avraam, 2020, Life cycle inventories of the treatment of iron and steelmaking by-products, ecoinvent association, Zürich, Switzerland
  property barium content 8.59296e-5
    The value of 'barium content' is documented in Turner & Symeonidis, 2020. Reference: Turner David & Symeonidis Avraam, 2020, Life cycle inventories of the treatment of iron and steelmaking by-products, ecoinvent association, Zürich, Switzerland
  property calcium content 0.329648
    The value of 'calcium content' is documented in Turner & Symeonidis, 2020. Reference: Turner David & Symeonidis Avraam, 2020, Life cycle inventories of the treatment of iron and steelmaking by-products, ecoinvent association, Zürich, Switzerland
  property carbon content, fossil 0.00102513
    The value of 'carbon content, fossil' is documented in Turner & Symeonidis, 2020. Reference: Turner David & Symeonidis Avraam, 2020, Life cycle inventories of the treatment of iron and steelmaking by-products, ecoinvent association, Zürich, Switzerland
  property carbon content, non-fossil 0
    The value of 'carbon content, non-fossil' is documented in Turner & Symeonidis, 2020. Reference: Turner David & Symeonidis Avraam, 2020, Life cycle inventories of the treatment of iron and steelmaking by-products, ecoinvent association, Zürich, Switzerland
  property chromium content 0.0040201
    The value of 'chromium content' is documented in Turner & Symeonidis, 2020. Reference: Turner David & Symeonidis Avraam, 2020, Life cycle inventories of the treatment of iron and steelmaking by-products, ecoinvent association, Zürich, Switzerland
  property copper content 0.000624121
    The value of 'copper content' is documented in Turner & Symeonidis, 2020. Reference: Turner David & Symeonidis Avraam, 2020, Life cycle inventories of the treatment of iron and steelmaking by-products, ecoinvent association, Zürich, Switzerland
  property fluorine content 0.0428141
    The value of 'fluorine content' is documented in Turner & Symeonidis, 2020. Reference: Turner David & Symeonidis Avraam, 2020, Life cycle inventories of the treatment of iron and steelmaking by-products, ecoinvent association, Zürich, Switzerland
  property heating value, net 0 MJ
    Non combustible products are assumed to have an LHV equal to zero (0).
  property iron content 0.060804
    The value of 'iron content' is documented in Turner & Symeonidis, 2020. Reference: Turner David & Symeonidis Avraam, 2020, Life cycle inventories of the treatment of iron and steelmaking by-products, ecoinvent association, Zürich, Switzerland
  property lead content 0.00018794
    The value of 'lead content' is documented in Turner & Symeonidis, 2020. Reference: Turner David & Symeonidis Avraam, 2020, Life cycle inventories of the treatment of iron and steelmaking by-products, ecoinvent association, Zürich, Switzerland
  property magnesium content 0.0524623
    The value of 'magnesium content' is documented in Turner & Symeonidis, 2020. Reference: Turner David & Symeonidis Avraam, 2020, Life cycle inventories of the treatment of iron and steelmaking by-products, ecoinvent association, Zürich, Switzerland
  property manganese content 0.0124623
    The value of 'manganese content' is documented in Turner & Symeonidis, 2020. Reference: Turner David & Symeonidis Avraam, 2020, Life cycle inventories of the treatment of iron and steelmaking by-products, ecoinvent association, Zürich, Switzerland
  property molybdenum content 0.000119598
    The value of 'molybdenum content' is documented in Turner & Symeonidis, 2020. Reference: Turner David & Symeonidis Avraam, 2020, Life cycle inventories of the treatment of iron and steelmaking by-products, ecoinvent association, Zürich, Switzerland
  property nickel content 7.00503e-5
    The value of 'nickel content' is documented in Turner & Symeonidis, 2020. Reference: Turner David & Symeonidis Avraam, 2020, Life cycle inventories of the treatment of iron and steelmaking by-products, ecoinvent association, Zürich, Switzerland
  property oxygen content 0.319031
    The value of 'oxygen content' is documented in Turner & Symeonidis, 2020. Reference: Turner David & Symeonidis Avraam, 2020, Life cycle inventories of the treatment of iron and steelmaking by-products, ecoinvent association, Zürich, Switzerland
  property phosphorus content 0.00119598
    The value of 'phosphorus content' is documented in Turner & Symeonidis, 2020. Reference: Turner David & Symeonidis Avraam, 2020, Life cycle inventories of the treatment of iron and steelmaking by-products, ecoinvent association, Zürich, Switzerland
  property potassium content 0.000145729
    The value of 'potassium content' is documented in Turner & Symeonidis, 2020. Reference: Turner David & Symeonidis Avraam, 2020, Life cycle inventories of the treatment of iron and steelmaking by-products, ecoinvent association, Zürich, Switzerland
  property price 0.000778 EUR2005
    Value is calculated based on the iron content of this material in combination with the price for iron ore concentrate on a per kg iron basis.
  property silicon content 0.0811055
    The value of 'silicon content' is documented in Turner & Symeonidis, 2020. Reference: Turner David & Symeonidis Avraam, 2020, Life cycle inventories of the treatment of iron and steelmaking by-products, ecoinvent association, Zürich, Switzerland
  property sodium content 0.000276382
    The value of 'sodium content' is documented in Turner & Symeonidis, 2020. Reference: Turner David & Symeonidis Avraam, 2020, Life cycle inventories of the treatment of iron and steelmaking by-products, ecoinvent association, Zürich, Switzerland
  property sulfur content 0.00977889
    The value of 'sulfur content' is documented in Turner & Symeonidis, 2020. Reference: Turner David & Symeonidis Avraam, 2020, Life cycle inventories of the treatment of iron and steelmaking by-products, ecoinvent association, Zürich, Switzerland
  property titanium content 0.00420101
    The value of 'titanium content' is documented in Turner & Symeonidis, 2020. Reference: Turner David & Symeonidis Avraam, 2020, Life cycle inventories of the treatment of iron and steelmaking by-products, ecoinvent association, Zürich, Switzerland
  property vanadium content 0.000423116
    The value of 'vanadium content' is documented in Turner & Symeonidis, 2020. Reference: Turner David & Symeonidis Avraam, 2020, Life cycle inventories of the treatment of iron and steelmaking by-products, ecoinvent association, Zürich, Switzerland
  property zinc content 0.000220101
    The value of 'zinc content' is documented in Turner & Symeonidis, 2020. Reference: Turner David & Symeonidis Avraam, 2020, Life cycle inventories of the treatment of iron and steelmaking by-products, ecoinvent association, Zürich, Switzerland
  properties: carbon allocation 0.00102 kg, carbon content 0.00102513, dry mass 0.995 kg, water content 0.00502513, water in wet mass 0.005 kg, wet mass 1 kg

## Inputs from technosphere
- anode, for metal electrolysis: 6.09571e-6 kg
- argon, liquid: 2.12561e-5 kg
- electric arc furnace converter: 6.64952e-14 unit
- electric arc furnace dust: -3.1797e-5 kg
- electric arc furnace secondary metallurgy slag: -3.19842e-5 kg
- electric arc furnace slag: -0.000242485 kg
- electricity, medium voltage: 8.67293e-6, 2.44095e-5, 2.33335e-6, 6.50021e-7, 7.93081e-6, 1.10123e-6, 4.19241e-5, 5.25607e-5, 1.34221e-6, 6.08171e-6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 kWh (39 suppliers, which the file names only by identifier); sum of these 0.000961192 kWh
- ferrochromium, high-carbon, 68% Cr: 0.000166492 kg
- ferromanganese, high-coal, 74.5% Mn: 1.06491e-5 kg
- ferronickel: 0.000201268 kg
- ferrosilicon: 4.04786e-6 kg
- hard coal: 9.9544e-6, 5.28157e-6 kg (2 suppliers, which the file names only by identifier); sum of these 1.5236e-5 kg
- inert waste, for final disposal: -4.26582e-6, -7.00899e-6 kg (2 suppliers, which the file names only by identifier); sum of these -1.12748e-5 kg
- iron scrap, sorted, pressed: 0.00151563 kg
- natural gas, high pressure: 4.81607e-8, 1.6275e-7, 3.50228e-7, 2.9611e-7, 1.30864e-6, 1.37839e-7, 1.17579e-6, 5.99518e-7, 3.32143e-8, 7.97143e-8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 m3 (21 suppliers, which the file names only by identifier); sum of these 1.24388e-5 m3
- nitrogen, liquid: 5.97996e-6 kg
- oxygen, liquid: 4.73463e-5 kg
- quicklime, in pieces, loose: 6.11379e-5, 3.72098e-5 kg (2 suppliers, which the file names only by identifier); sum of these 9.83478e-5 kg
- refractory, basic, packed: 2.57535e-5 kg

## Inputs from nature
- Water, cooling, unspecified natural origin [natural resource, in water]: 1.08756e-5 m3

## Emissions to nature
- Benzene [air, unspecified]: 6.03973e-10 kg
- Benzene, hexachloro- [air, unspecified]: 2.57535e-12 kg
- Cadmium II [air, unspecified]: 2.02237e-11 kg
- Carbon dioxide, fossil [air, unspecified]: 7.33894e-5 kg
- Carbon monoxide, fossil [air, unspecified]: 7.88536e-7 kg
- Chromium III [air, unspecified]: 3.04719e-10 kg
- Copper ion [air, unspecified]: 1.24512e-10 kg
- Dioxins, measured as 2,3,7,8-tetrachlorodibenzo-p-dioxin [air, unspecified]: 8.14397e-16 kg
- Hydrocarbons, aromatic [air, unspecified]: 1.28017e-7 kg
- Hydrochloric acid [air, unspecified]: 8.82785e-9 kg
- Hydrogen fluoride [air, unspecified]: 4.07198e-11 kg
- Lead II [air, unspecified]: 7.6857e-10 kg
- Mercury II [air, unspecified]: 3.32476e-11 kg
- Nickel II [air, unspecified]: 1.28767e-10 kg
- Nitrogen oxides [air, unspecified]: 1.28553e-7 kg
- PAH, polycyclic aromatic hydrocarbons [air, unspecified]: 1.55324e-10 kg
- Particulate Matter, < 2.5 um [air, unspecified]: 2.44743e-8 kg
- Particulate Matter, > 10 um [air, unspecified]: 8.63798e-9 kg
- Particulate Matter, > 2.5 um and < 10um [air, unspecified]: 2.44743e-8 kg
- Polychlorinated biphenyls [air, unspecified]: 3.7172e-13 kg
- Sulfur dioxide [air, unspecified]: 5.38673e-8 kg
- Water [air, unspecified]: 4.85609e-6 m3
- Zinc II [air, unspecified]: 3.64209e-9 kg
- Water [water, unspecified]: 3.8155e-6 m3
