# treatment of waste textile, soiled, municipal incineration

Dataset: EcoSpold 2, unit process
Geography: RoW
Time period: 2006-01-01 to 2022-12-31
Technology level: current
Classification: ISIC rev.4 ecoinvent: 3821:Treatment and disposal of non-hazardous waste
Synonyms: Siedlungsabfallverbrennung; Kehrichtverbrennung; municipal waste incineration
Scenario: Business-as-Usual
System model: Allocation at the point of substitution
Share of production covered: 1.8 %
Generated by: Gabor Doka
Published in: Doka G. 2013
Database: ecoinvent
isCopyrightProtected: true

## General comment
This dataset represents the activity of waste disposal of waste textile, soiled in a municipal solid waste incinerator (MSWI) // Recommended use of this dataset: For small or large amounts of soiled textiles, like used filters, absorbers, cleaning threads, and protective clothing from natural gas processing (textiles + 5% waste oil, 72.1% biogenic carbon content) // // Waste composition (wet, in ppm): upper heating value 19.78 MJ/kg; lower heating value 14.45 MJ/kg; H2O 229680; O 287940; H 49839; C 345150; S 14523; N 70864; P 37.5; B n.a.; Cl 1791.3; Br n.a.; F n.a.; I n.a.; Ag n.a.; As 0.06; Ba n.a.; Cd 0.04; Co n.a.; Cr 0.56; Cu 44.639; Hg 0.00006; Mn n.a.; Mo n.a.; Ni 0.16; Pb 25.603; Sb n.a.; Se n.a.; Sn n.a.; V n.a.; Zn 105.08; Be n.a.; Sc n.a.; Sr n.a.; Ti n.a.; Tl 0.03; W n.a.; Si n.a.; Fe n.a.; Ca n.a.; Al n.a.; K n.a.; Mg n.a.; Na n.a.; // Share of carbon in waste that is biogenic 72.1%. // Share of metals in waste not oxidised and bulk-recyclable (exclude very small or thin parts) Iron: 0%; Alu: 0%; Copper: 0%. // One kg of this waste produces 0.03292 kg of slag and 0.01586 kg of residues, which are landfilled. Additional solidification with 0.006345 kg of cement. // Net energy production: 1.77MJ/kg electric energy and 3.57MJ/kg thermal energy. // Recovery of metal scrap to recycling: 0g iron scrap, 0g aluminium scrap, 0g copper scrap.

## Included activities start
waste incineration from waste reception gate and delivery into waste bunker at incinerator plant site (without transports to the incinerator)

## Included activities end
Waste-specific short-term emissions to water from leachate. Long-term emissions from landfill to ground water.

## Geography
Specific to the technology mix encountered in Switzerland in 2010. Well applicable to modern incineration practices in Europe, North America or Japan.

## Technology
average Swiss MSWI plants in 2010 (grate incinerators) with electrostatic precipitator for fly ash (ESP), wet flue gas scrubber and 25% SNCR , 42.77% SCR-high dust , 32.68% SCR-low dust -DeNOx facilities and 0% without Denox (weighted according to mass of burnt waste, representing Swiss average). Efficiency of iron scrap separation from slag : 58%. Efficiency of non-ferrous scrap separation from slag : 31%. Gross electric efficiency technology mix 15.84% and Gross thermal efficiency technology mix 28.51%

## Time period
Waste composition as given in literature reference, theoretical data or other source. Transfer coefficients for modern MSWI.

## Reference product
- heat, for reuse in municipal waste incineration only: 1 MJ; name E_th_prod_MSWI; By-product classification allocatable product; CPC 17300: Steam and hot water; lognormal variance with pedigree 0.096644, pedigree (1,1,1,1,1)
  Net electricity generated from this waste and used in internal MSWI plant energy redistribution.
  Uncertainty: uncertainty is calculated from uncertainties in waste composition and uncertainties in energy efficiency and the uncertainty in internal energy demand
  production volume 1.0718e10 MJ
    calculated in proportion to reference product waste input to incinerator
  property exergy 0.1842 MJ; name E_th_prod_MSWI_exergy
    This exergy property is based on the exergy content of the product.
  property price 0.0106 EUR2005
    Average European district heat price from Ecoheatcool and Euroheat 2005-2006, Ecoheat Work package 1: The European heat market. Final report. 10.6 EUR/GJ i s the price of district heat. http://www.solarthermalworld.org/files/Ecoheatcool%20WP1%20Web.pdf?download
  property true value relation 0.1842; name E_th_prod_MSWI_true_value_relation
    property to calculate "true value" from
  properties: carbon allocation 0 kg, carbon content 0

## Inputs from technosphere
- EDTA, ethylenediaminetetraacetic acid: 3.38519e-7 kg
- acetic acid, without water, in 98% solution state: 4.39017e-8 kg
- acrylic dispersion, with water, in 58% solution state: 1.93362e-8 kg
- acrylic varnish, with water, in 53% solution state: 6.35331e-9 kg
- acrylonitrile-butadiene-styrene copolymer: 3.18448e-8 kg
- activated silica: 2.34418e-6 kg
- aluminium scrap, new: -1.44997e-8, -1.44997e-8 kg (2 suppliers, which the file names only by identifier); sum of these -2.89993e-8 kg
- aluminium scrap, post-consumer: -4.09076e-7 kg
- aluminium sulfate, powder: 3.24629e-8, 6.83843e-9 kg (2 suppliers, which the file names only by identifier); sum of these 3.93013e-8 kg
- aluminium, cast alloy: 1.05587e-7 kg
- aluminium, wrought alloy: 1.42286e-6 kg
- ammonia, anhydrous, liquid: 8.36956e-7, 8.7722e-8, 1.85229e-6, 3.22394e-6, 4.31153e-7, 3.9215e-7, 9.27713e-6, 2.77137e-7 kg (8 suppliers, which the file names only by identifier); sum of these 1.63785e-5 kg
- ammonium chloride: 6.30738e-7 kg
- anode, for metal electrolysis: 4.3297e-8 kg
- antimony: 2.97903e-9 kg
- ash from paper production sludge: -1.57778e-8 kg
- average incineration residue: -1.2924e-13, -1.09703e-15 kg (2 suppliers, which the file names only by identifier); sum of these -1.30337e-13 kg
- barium carbonate: 7.67074e-8 kg
- blast furnace sludge: -1.30799e-7, -7.65035e-8, -8.61231e-7, -1.94356e-8 kg (4 suppliers, which the file names only by identifier); sum of these -1.08797e-6 kg
- brass: 3.05421e-10, 1.53478e-12 kg (2 suppliers, which the file names only by identifier); sum of these 3.06956e-10 kg
- building, budget hotel: 9.17197e-13, 2.75332e-12 unit (2 suppliers, which the file names only by identifier); sum of these 3.67051e-12 unit
- building, hall: 3.87882e-9 m2
- building, hall, steel construction: 2.71817e-10 m2
- building, hostel: 5.47803e-13 unit
- building, luxury hotel: 5.90031e-14, 7.46758e-15 unit (2 suppliers, which the file names only by identifier); sum of these 6.64707e-14 unit
- butane: 2.39803e-8 kg
- calcium chloride: 6.42012e-8, 2.22351e-7 kg (2 suppliers, which the file names only by identifier); sum of these 2.86552e-7 kg
- cement, unspecified: 2.68452e-6, 1.00722e-8, 6.58816e-9, 3.78642e-9, 2.66572e-7, 7.0192e-8, 8.36739e-9, 4.27752e-8, 1.61502e-7 kg (9 suppliers, which the file names only by identifier); sum of these 3.25437e-6 kg
- chemical, inorganic: 3.36482e-7 kg
- chemical, organic: 1.27026e-8 kg
- chlorine dioxide: 8.58658e-9 kg
- chlorine, liquid: 1.38413e-9, 2.76879e-10 kg (2 suppliers, which the file names only by identifier); sum of these 1.66101e-9 kg
- chromium: 5.28347e-10 kg
- cleaning consumables, without water, in 13.6% solution state: 1.61555e-8 kg
- clinker: 2.11185e-7, 4.89852e-8, 3.00633e-6, 9.37015e-7, 1.00261e-6, 1.52881e-8, 6.27972e-8, 3.7584e-8 kg (8 suppliers, which the file names only by identifier); sum of these 5.32179e-6 kg
- coffee maker: 6.89211e-11 unit
- coke: 0.000446519 MJ
- compact fluorescent lamp: 5.68641e-8 unit
- compressed air, 800 kPa gauge: 1.27056e-11, 5.17015e-12 m3 (2 suppliers, which the file names only by identifier); sum of these 1.78757e-11 m3
- computer, laptop: 3.84998e-10 unit
- cookstove: 9.19186e-11 unit
- copper cake: -6.8938e-6 kg
- copper scrap, sorted, pressed: -8.96468e-9 kg
- copper sulfate: 6.55891e-8 kg
- copper, cathode: 1.07242e-8 kg
- corrugated board box: 4.26742e-7, 9.90513e-7, 1.58962e-8 kg (3 suppliers, which the file names only by identifier); sum of these 1.43315e-6 kg
- diesel: 1.11369e-10, 5.51814e-11, 1.12753e-11, 9.56183e-6, 3.0425e-7, 7.80091e-12, 1.09971e-9, 2.6528e-12 kg (8 suppliers, which the file names only by identifier); sum of these 9.86737e-6 kg
- diesel, burned in building machine: 1.62571e-7 MJ
- dishwasher: 1.10037e-11 unit
- dryer: 1.65199e-11 unit
- electric kettle: 1.06914e-11 unit
- electricity, low voltage: 7.68317e-6, 3.39077e-7, 6.71971e-7, 8.02885e-5, 6.45499e-6, 1.15147e-7, 8.73873e-6, 4.16266e-9, 2.24995e-6, 2.094e-8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 kWh (13 suppliers, which the file names only by identifier); sum of these 0.000108718 kWh
- electricity, medium voltage: 9.88493e-7, 1.33472e-6, 4.00697e-7, 0.000333433, 3.53504e-5, 0.000201419, 1.26758e-6, 0.00033668, 4.74667e-7, 5.98989e-6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 kWh (58 suppliers, which the file names only by identifier); sum of these 0.00402162 kWh
- esterquat: 2.78709e-10, 5.54814e-10 kg (2 suppliers, which the file names only by identifier); sum of these 8.33524e-10 kg
- ethanol, without water, in 99.7% solution state, from ethylene: 2.24351e-8, 4.99559e-8 kg (2 suppliers, which the file names only by identifier); sum of these 7.2391e-8 kg
- ethoxylated alcohol (AE11): 4.52207e-9 kg
- ethylene glycol: 4.66553e-9 kg
- ethylene glycol monoethyl ether: 8.51441e-9 kg
- ethylene vinyl acetate copolymer: 3.55286e-6, 1.75461e-6 kg (2 suppliers, which the file names only by identifier); sum of these 5.30747e-6 kg
- ferrite: 5.17799e-7 kg
- fibre, cotton: 3.62536e-5 kg
- furniture, wooden: 1.67321e-7 kg
- green liquor dregs: -1.93198e-8 kg
- hair dryer: 2.06026e-9 unit
- hard coal: 1.60199e-6, 2.12565e-6, 9.63844e-7, 5.95323e-7, 7.72233e-6, 9.8358e-7, 7.50437e-7, 4.18278e-7, 2.28713e-7 kg (9 suppliers, which the file names only by identifier); sum of these 1.53901e-5 kg
- hazardous waste, for incineration: -1.66701e-6, -8.01658e-7, -2.09549e-8 kg (3 suppliers, which the file names only by identifier); sum of these -2.48962e-6 kg
- hazardous waste, for underground deposit: -7.55423e-6, -4.86587e-7 kg (2 suppliers, which the file names only by identifier); sum of these -8.04082e-6 kg
- heat, central or small-scale, other than natural gas: 0.000497685 MJ
- heat, district or industrial, natural gas: 0.000104038, 0.000100129, 5.93928e-5, 8.89349e-7 MJ (4 suppliers, which the file names only by identifier); sum of these 0.000264449 MJ
- heat, district or industrial, other than natural gas: 0.000310198, 1.52009e-7, 5.17863e-6, 1.27789e-7 MJ (4 suppliers, which the file names only by identifier); sum of these 0.000315656 MJ
- heavy fuel oil: 5.51591e-7, 4.6414e-9, 2.3596e-8, 3.05958e-8, 5.95423e-9, 7.97062e-9, 1.1364e-7 kg (7 suppliers, which the file names only by identifier); sum of these 7.3799e-7 kg
- hydrochloric acid, without water, in 30% solution state: 3.02039e-8, 1.35249e-7 kg (2 suppliers, which the file names only by identifier); sum of these 1.65453e-7 kg
- hydrogen peroxide, without water, in 50% solution state: 4.40333e-6, 7.14506e-9 kg (2 suppliers, which the file names only by identifier); sum of these 4.41048e-6 kg
- hydrogen, liquid: 6.0147e-8, 2.75247e-7 kg (2 suppliers, which the file names only by identifier); sum of these 3.35394e-7 kg
- industrial machine, heavy, unspecified: 3.54226e-9 kg
- inert waste: -3.50679e-7, -3.02029e-9, -1.2361e-6 kg (3 suppliers, which the file names only by identifier); sum of these -1.5898e-6 kg
- iron sulfate: 2.07956e-7, 1.02701e-7 kg (2 suppliers, which the file names only by identifier); sum of these 3.10656e-7 kg
- iron(III) chloride, without water, in 14% iron solution state: 4.49989e-8 kg
- iron(III) sulfate, without water, in 12.5% iron solution state: 1.87507e-7 kg
- isopropanol: 3.54226e-8 kg
- lead: 2.56166e-7 kg
- lead concentrate: 1.33875e-5 kg
- light fuel oil: 3.62838e-7, 7.85014e-7, 3.60145e-8, 3.46285e-9, 7.78996e-8, 2.57347e-9, 2.38988e-9, 1.78445e-8 kg (8 suppliers, which the file names only by identifier); sum of these 1.28804e-6 kg
- lime: 2.79601e-7 kg
- lime, hydrated, packed: 2.28521e-6, 1.93976e-8 kg (2 suppliers, which the file names only by identifier); sum of these 2.30461e-6 kg
- limestone, unprocessed: 7.17959e-7, 7.43267e-9, 1.81773e-5 kg (3 suppliers, which the file names only by identifier); sum of these 1.89026e-5 kg
- liquefied petroleum gas: 1.50116e-7 kg
- lubricating oil: 3.03629e-8, 6.39605e-9 kg (2 suppliers, which the file names only by identifier); sum of these 3.67589e-8 kg
- magnesium: 4.59187e-9 kg
- magnesium oxide: 3.4883e-8 kg
- maize starch: 8.00904e-6 kg
- maleic unsaturated polyester resin: 1.96411e-6 kg
- manganese dioxide: 9.19914e-7 kg
- manganese sulfate: 2.77986e-9 kg
- mattress: 7.53731e-9 unit
- meat and bone meal: 2.19524e-9, 3.70128e-12 kg (2 suppliers, which the file names only by identifier); sum of these 2.19894e-9 kg
- microwave oven: 6.02893e-11 unit
- municipal solid waste: -9.60134e-5, -2.13076e-5, -3.37727e-10, -8.38041e-8, -5.84206e-10, -1.99207e-5, -4.08804e-10 kg (7 suppliers, which the file names only by identifier); sum of these -0.000137327 kg
- natural gas processing plant: 2.36648e-18 unit
- natural gas, high pressure: 1.58429e-8, 6.68734e-9, 3.83002e-8, 1.13661e-8, 6.42986e-7, 6.57183e-8, 2.70108e-7, 6.00629e-6, 7.17369e-9, 2.11685e-10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 m3 (29 suppliers, which the file names only by identifier); sum of these 3.13342e-5 m3
- nickel smelter slag: -2.11345e-9 kg
- nickel, class 1: 2.11345e-9 kg
- nitrogen, liquid: 3.99802e-6 kg
- non-ionic surfactant: 2.59132e-8 kg
- nylon 6: 1.01538e-6, 4.98114e-7 kg (2 suppliers, which the file names only by identifier); sum of these 1.5135e-6 kg
- oxygen, liquid: 0.000104196, 6.38627e-8 kg (2 suppliers, which the file names only by identifier); sum of these 0.00010426 kg
- paper, woodcontaining, lightweight coated: 4.99615e-7, 1.48416e-6 kg (2 suppliers, which the file names only by identifier); sum of these 1.98377e-6 kg
- paper, woodfree, coated: 2.25859e-5 kg
- petrol, unleaded: 3.90442e-10, 4.49577e-8, 1.46064e-9, 1.70473e-8, 1.61887e-9, 3.91714e-10, 8.04279e-11 kg (7 suppliers, which the file names only by identifier); sum of these 6.59471e-8 kg
- petroleum coke: 2.57454e-8 kg
- phosphoric acid, industrial grade, without water, in 85% solution state: 1.0372e-8 kg
- pig iron: 5.34719e-8, 5.7731e-7 kg (2 suppliers, which the file names only by identifier); sum of these 6.30782e-7 kg
- plastic processing factory: 3.34837e-13 unit
- polyacrylamide: 5.89726e-7 kg
- polyester resin, unsaturated: 2.37954e-6, 1.62932e-5 kg (2 suppliers, which the file names only by identifier); sum of these 1.86728e-5 kg
- polyethylene, low density, granulate: 4.05183e-11 kg
- polymethyl methacrylate, beads: 1.94746e-7 kg
- polypropylene, granulate: 4.87007e-7 kg
- polyurethane, flexible foam: 0.000282524, 5.78663e-5 kg (2 suppliers, which the file names only by identifier); sum of these 0.00034039 kg
- polyvinylchloride, bulk polymerised: 1.10133e-9 kg
- polyvinylidenchloride, granulate: 7.88407e-10, 1.59642e-9 kg (2 suppliers, which the file names only by identifier); sum of these 2.38483e-9 kg
- potassium permanganate: 1.0231e-8 kg
- printer, laser, black/white: 2.06566e-10 unit
- printer, laser, colour: 2.0672e-10 unit
- printing ink, offset, without solvent, in 47.5% solution state: 1.50627e-7 kg
- propane: 5.48039e-7 kg
- pulp factory: 8.73132e-15 unit
- pulpwood, hardwood, measured as solid wood under bark: 4.26109e-9 m3
- pulpwood, softwood, measured as solid wood under bark: 7.81311e-9 m3
- quicklime, in pieces, loose: 4.74213e-6, 7.84776e-11 kg (2 suppliers, which the file names only by identifier); sum of these 4.74221e-6 kg
- quicklime, milled, loose: 3.01516e-8, 3.60788e-6 kg (2 suppliers, which the file names only by identifier); sum of these 3.63804e-6 kg
- refrigerator: 8.23646e-10 unit
- residual softwood, wet: 5.22505e-7 m3
- rosin size, for paper production: 7.69781e-7, 1.61045e-6 kg (2 suppliers, which the file names only by identifier); sum of these 2.38023e-6 kg
- scrap copper: -1.21265e-11, -2.58463e-10, -5.44216e-10 kg (3 suppliers, which the file names only by identifier); sum of these -8.14805e-10 kg
- scrap steel: -9.85913e-9, -2.50263e-5, -7.78169e-6 kg (3 suppliers, which the file names only by identifier); sum of these -3.28179e-5 kg
- sheet rolling, aluminium: 4.04597e-7 kg
- silica sand: 1.4648e-5 kg
- silicone product: 2.61382e-10, 5.31973e-10 kg (2 suppliers, which the file names only by identifier); sum of these 7.93354e-10 kg
- silver: 6.40468e-10 kg
- sludge from pulp and paper production: -5.58128e-8 kg
- soap: 3.16499e-7 kg
- soda ash, dense: 2.79663e-6 kg
- soda ash, light: 1.26733e-11 kg
- sodium chlorate, powder: 3.21997e-9 kg
- sodium chloride, powder: 1.72288e-7 kg
- sodium dichromate: 7.50028e-9 kg
- sodium hydrogen sulfite: 6.60705e-10 kg
- sodium hydrosulfide: 7.66059e-7 kg
- sodium hydroxide, without water, in 50% solution state: 2.97921e-6 kg
- sodium hypochlorite, without water, in 15% solution state: 2.48966e-9, 1.18187e-8 kg (2 suppliers, which the file names only by identifier); sum of these 1.43084e-8 kg
- sodium silicate, spray powder, 80%: 3.21593e-6 kg
- sodium silicate, without water, in 37% solution state: 8.36266e-9, 4.12997e-9 kg (2 suppliers, which the file names only by identifier); sum of these 1.24926e-8 kg
- sodium sulfide: 2.17441e-8 kg
- spent antifreezer liquid: -2.42654e-11 kg
- spent solvent mixture: -1.75285e-8, -2.78474e-14, -6.84901e-9 kg (3 suppliers, which the file names only by identifier); sum of these -2.43776e-8 kg
- steam, in chemical industry: 1.02689e-9, 5.82425e-9 kg (2 suppliers, which the file names only by identifier); sum of these 6.85113e-9 kg
- steel, low-alloyed: 3.19415e-5 kg
- steel, low-alloyed, hot rolled: 1.83152e-8 kg
- strontium carbonate: 2.70595e-7 kg
- sulfamic acid: 1.70461e-10 kg
- sulfidic tailings, from zinc-lead mine operation: -7.26661e-8, -1.30517e-8, -1.02297e-8, -2.46218e-8, -3.71091e-9, -8.9598e-9, -4.17936e-8, -1.89779e-8 kg (8 suppliers, which the file names only by identifier); sum of these -1.94012e-7 kg
- sulfite: 4.23149e-6 kg
- sulfite pulp, bleached: 3.47984e-7 kg
- sulfur: 1.37385e-7 kg
- sulfur dioxide, liquid: 1.43825e-7 kg
- sulfuric acid: 1.24237e-5, 1.625e-6 kg (2 suppliers, which the file names only by identifier); sum of these 1.40487e-5 kg
- synthetic rubber: 2.90855e-9 kg
- tap water: 3.02703e-6, 1.20044e-7, 2.58664e-5, 2.23996e-7, 3.46398e-5, 0.000235201, 0.00106664 kg (7 suppliers, which the file names only by identifier); sum of these 0.00136572 kg
- television: 1.05305e-9 unit
- textile, jute: 1.49858e-11 kg
- textile, knit cotton: 1.52678e-7 kg
- textile, woven cotton: 5.17107e-5 kg
- thermoforming, with calendering: 6.46705e-9 kg
- tissue paper: 1.10606e-6 kg
- toner module, laser printer, black/white: 3.96607e-8 unit
- toner module, laser printer, colour: 3.96902e-8 unit
- transport, freight train: 5.04847e-6 metric ton*km
- transport, freight, inland waterways, barge: 6.72665e-6 metric ton*km
- transport, freight, lorry 16-32 metric ton, EURO3: 3.56712e-6, 1.47447e-5, 3.30734e-5 metric ton*km (3 suppliers, which the file names only by identifier); sum of these 5.13853e-5 metric ton*km
- transport, freight, lorry 16-32 metric ton, EURO4: 2.10369e-7 metric ton*km
- transport, freight, lorry 3.5-7.5 metric ton, EURO3: 2.89167e-10 metric ton*km
- transport, freight, lorry >32 metric ton, EURO3: 1.86265e-6 metric ton*km
- transport, freight, sea, container ship: 2.29829e-5 metric ton*km
- urea: 1.12247e-9, 7.15936e-9, 6.11359e-9 kg (3 suppliers, which the file names only by identifier); sum of these 1.43954e-8 kg
- used toner module, laser printer, black/white: -3.49014e-8 kg
- used toner module, laser printer, colour: -3.49274e-8 kg
- vacuum cleaner: 7.69661e-11 unit
- washing machine: 4.13558e-11 unit
- washing, drying and finishing laundry: 3.6787e-6 kg
- waste emulsion paint: -6.7556e-18, -4.18768e-9, -3.94749e-10 kg (3 suppliers, which the file names only by identifier); sum of these -4.58243e-9 kg
- waste glass: -4.49509e-9, -3.50224e-11, -8.38906e-11, -9.10193e-10, -7.82687e-12, -1.72894e-9, -1.18855e-11, -8.57779e-9, -1.90319e-12 kg (9 suppliers, which the file names only by identifier); sum of these -1.58525e-8 kg
- waste graphical paper: -6.61192e-8, -1.82982e-8, -1.60001e-9, -6.44717e-9, -2.22599e-6, -1.19828e-7, -1.19344e-8 kg (7 suppliers, which the file names only by identifier); sum of these -2.45022e-6 kg
- waste gypsum: -5.80493e-9, -1.22801e-7, -3.99822e-7 kg (3 suppliers, which the file names only by identifier); sum of these -5.28429e-7 kg
- waste mineral oil: -2.08486e-8, -2.20508e-6, -8.42165e-7 kg (3 suppliers, which the file names only by identifier); sum of these -3.06809e-6 kg
- waste paper, unsorted: -1.7193e-9, -3.17025e-6, -3.17025e-6 kg (3 suppliers, which the file names only by identifier); sum of these -6.34222e-6 kg
- waste paperboard: -3.33611e-11, -2.17586e-11, -4.05841e-9, -2.18468e-10, -5.36529e-10, -1.17544e-11, -1.20548e-10, -2.91713e-12 kg (8 suppliers, which the file names only by identifier); sum of these -5.00374e-9 kg
- waste paperboard, unsorted: -7.16575e-7, -7.16575e-7 kg (2 suppliers, which the file names only by identifier); sum of these -1.43315e-6 kg
- waste plastic, mixture: -4.0016e-6, -2.02209e-8, -7.23764e-9, -4.46141e-8, -2.64536e-6, -2.80134e-5, -2.67372e-7, -1.04867e-7, -1.10434e-7 kg (9 suppliers, which the file names only by identifier); sum of these -3.52151e-5 kg
- waste polyethylene: -6.06935e-9, -1.17929e-13, -3.15025e-11, -3.00673e-13, -2.27394e-14, -1.24189e-13, -6.98478e-10, -3.90008e-12 kg (8 suppliers, which the file names only by identifier); sum of these -6.80379e-9 kg
- waste polyethylene terephthalate: -2.85493e-11, -3.6726e-13, -9.09085e-13, -3.29409e-11, -1.66457e-13, -8.63262e-13, -2.30605e-10, -2.20098e-12 kg (8 suppliers, which the file names only by identifier); sum of these -2.96602e-10 kg
- waste polyethylene/polypropylene product: -3.3024e-7, -1.30265e-7, -3.90893e-9 kg (3 suppliers, which the file names only by identifier); sum of these -4.64415e-7 kg
- waste polypropylene: -2.79746e-11, -2.17463e-9, -1.26792e-11, -1.75654e-8, -6.92461e-11, -1.67651e-10, -6.57556e-11, -2.50915e-9 kg (8 suppliers, which the file names only by identifier); sum of these -2.25925e-8 kg
- waste polyurethane foam: -0.000340123, -2.66787e-7 kg (2 suppliers, which the file names only by identifier); sum of these -0.00034039 kg
- waste polyvinylchloride: -1.3384e-12, -6.94106e-12, -2.95296e-12, -7.30951e-12, -1.7697e-11, -2.64862e-10, -2.29551e-10, -1.85418e-9 kg (8 suppliers, which the file names only by identifier); sum of these -2.38483e-9 kg
- waste polyvinylchloride product: -1.10133e-9 kg
- waste textile, soiled: -5.42498e-5, -7.97776e-7 kg (2 suppliers, which the file names only by identifier); sum of these -5.50476e-5 kg
- waste wood, untreated: -4.6838e-8, -4.29758e-7, -6.4064e-7, -6.8452e-5, -2.71841e-7, -2.1664e-8, -1.79937e-6, -5.15959e-6 kg (8 suppliers, which the file names only by identifier); sum of these -7.68217e-5 kg
- waste yarn and waste textile: -1.65646e-5 kg
- waste, from silicon wafer production: -7.93354e-10 kg
- wastewater, average: -1.63672e-10, -9.81903e-7, -6.51261e-9 m3 (3 suppliers, which the file names only by identifier); sum of these -9.88579e-7 m3
- wastewater, unpolluted: -8.67465e-10, -1.79381e-7 m3 (2 suppliers, which the file names only by identifier); sum of these -1.80249e-7 m3
- water, completely softened: 1.02635e-7 kg
- water, deionised: 3.49854e-6, 0.000971882, 0.00315504 kg (3 suppliers, which the file names only by identifier); sum of these 0.00413042 kg
- white spirit: 4.95591e-8 kg
- wire drawing, steel: 3.18448e-5 kg
- wood ash mixture, pure: -9.22004e-7 kg
- yarn, cotton: 0.000227291 kg
- zinc: 1.86075e-6 kg
- zinc concentrate: 0.00119486 kg
- zinc oxide: 3.06798e-5 kg
- zinc slag: -0.000149806 kg

## Inputs from nature
- Water, cooling, unspecified natural origin [natural resource, in water]: 3.30049e-5 m3
- Water, river [natural resource, in water]: 1.44978e-5 m3
- Water, unspecified natural origin [natural resource, in water]: 0.000211397 m3
- Water, well, in ground [natural resource, in water]: 7.43332e-7 m3

## Emissions to nature
- 2-Propanol [air, urban air close to ground]: 3.54226e-8 kg
- Ammonia [air, unspecified]: 2.51291e-8 kg
- Antimony ion [air, unspecified]: 5.14724e-11 kg
- Arsenic ion [air, unspecified]: 1.36476e-10 kg
- Benzene [air, unspecified]: 9.1893e-12 kg
- Benzene, ethyl- [air, urban air close to ground]: 1.57452e-9 kg
- Benzo(a)pyrene [air, unspecified]: 5.65478e-16 kg
- Cadmium II [air, unspecified]: 3.69934e-9 kg
- Carbon dioxide, fossil [air, non-urban air or from high stacks]: 1.00305e-7 kg
- Carbon dioxide, fossil [air, unspecified]: 0.000149977 kg
- Carbon dioxide, non-fossil [air, unspecified]: 1.49191e-8 kg
- Carbon monoxide, fossil [air, unspecified]: 3.87878e-8 kg
- Chlorine [air, unspecified]: 6.11954e-11 kg
- Chromium III [air, unspecified]: 3.41679e-12 kg
- Cobalt II [air, unspecified]: 1.62625e-12 kg
- Copper ion [air, unspecified]: 3.54528e-10 kg
- Dioxins, measured as 2,3,7,8-tetrachlorodibenzo-p-dioxin [air, unspecified]: 3.05686e-18 kg
- Formaldehyde [air, unspecified]: 3.80996e-11 kg
- Helium [air, unspecified]: 1.45005e-10 kg
- Heptane [air, urban air close to ground]: 1.54039e-8 kg
- Hydrocarbons, unspecified [air, non-urban air or from high stacks]: 1.91115e-9 kg
- Hydrochloric acid [air, unspecified]: 6.8604e-10 kg
- Lead II [air, unspecified]: 3.41018e-9 kg
- Manganese II [air, unspecified]: 2.69458e-11 kg
- Mercury II [air, unspecified]: 2.74606e-11 kg
- Methane, fossil [air, non-urban air or from high stacks]: 9.85032e-11 kg
- Methane, fossil [air, unspecified]: 2.3073e-9 kg
- Methanol [air, urban air close to ground]: 1.62489e-9 kg
- Molybdenum VI [air, unspecified]: 1.93281e-13 kg
- NMVOC, non-methane volatile organic compounds [air, non-urban air or from high stacks]: 4.03623e-10 kg
- NMVOC, non-methane volatile organic compounds [air, unspecified]: 5.94051e-9 kg
- Nickel II [air, unspecified]: 6.65021e-12 kg
- Nitrogen oxides [air, non-urban air or from high stacks]: 9.24969e-11 kg
- Nitrogen oxides [air, unspecified]: 6.19485e-6 kg
- Nitrogen oxides [air, urban air close to ground]: 4.15262e-8 kg
- PAH, polycyclic aromatic hydrocarbons [air, unspecified]: 1.16877e-13 kg
- Particulate Matter, < 2.5 um [air, unspecified]: 4.13802e-9 kg
- Particulate Matter, > 10 um [air, unspecified]: 1.58531e-7 kg
- Particulate Matter, > 2.5 um and < 10um [air, unspecified]: 1.16602e-9 kg
- Propylene oxide [air, urban air close to ground]: 2.9573e-9 kg
- Sulfur dioxide [air, non-urban air or from high stacks]: 2.84098e-13 kg
- Sulfur dioxide [air, unspecified]: 2.81669e-6 kg
- Sulfur dioxide [air, urban air close to ground]: 1.48408e-8 kg
- Sulfur oxides [air, unspecified]: 1.8096e-8 kg
- Sulfuric acid [air, unspecified]: 2.24559e-8 kg
- Toluene [air, urban air close to ground]: 1.3909e-9 kg
- VOC, volatile organic compounds [air, unspecified]: 5.28429e-11 kg
- Water [air, unspecified]: 3.96284e-5 m3
- Xylene [air, urban air close to ground]: 1.3909e-9 kg
- Zinc II [air, unspecified]: 3.65238e-8 kg
- Sulfur [soil, industrial]: 1.19776e-5 kg
- AOX, Adsorbable Organic Halogen [water, surface water]: 1.07332e-9 kg
- AOX, Adsorbable Organic Halogen [water, unspecified]: 8.68656e-10 kg
- Acidity, unspecified [water, surface water]: 2.51928e-10 kg
- Aluminium III [water, surface water]: 2.51842e-10 kg
- Ammonium [water, ocean]: 3.62431e-9 kg
- Ammonium [water, surface water]: 1.58225e-8 kg
- Ammonium [water, unspecified]: 1.14771e-9 kg
- Aniline [water, unspecified]: 5.73853e-11 kg
- Antimony ion [water, surface water]: 6.14431e-10 kg
- Antimony ion [water, unspecified]: 5.73853e-12 kg
- Arsenic ion [water, ocean]: 8.10792e-11 kg
- Arsenic ion [water, surface water]: 9.93021e-11 kg
- BOD5, Biological Oxygen Demand [water, surface water]: 4.49111e-7 kg
- BOD5, Biological Oxygen Demand [water, unspecified]: 2.10351e-9 kg
- COD, Chemical Oxygen Demand [water, ocean]: 7.73036e-9 kg
- COD, Chemical Oxygen Demand [water, surface water]: 3.07572e-6 kg
- COD, Chemical Oxygen Demand [water, unspecified]: 6.43779e-9 kg
- Cadmium II [water, ocean]: 6.59374e-11 kg
- Cadmium II [water, surface water]: 7.82085e-11 kg
- Calcium II [water, surface water]: 3.98909e-8 kg
- Chloride [water, surface water]: 1.21115e-7 kg
- Chlorine [water, unspecified]: 2.88052e-11 kg
- Chromium III [water, unspecified]: 9.5192e-13 kg
- Chromium VI [water, surface water]: 2.77986e-13 kg
- Chromium VI [water, unspecified]: 2.88052e-11 kg
- Cobalt II [water, surface water]: 1.73741e-13 kg
- Copper ion [water, ocean]: 2.56923e-11 kg
- Copper ion [water, surface water]: 2.36416e-10 kg
- Copper ion [water, unspecified]: 6.86373e-13 kg
- Cyanide [water, ocean]: 2.00788e-12 kg
- Cyanide [water, surface water]: 8.52304e-13 kg
- DOC, Dissolved Organic Carbon [water, surface water]: 1.13476e-6 kg
- DOC, Dissolved Organic Carbon [water, unspecified]: 2.31297e-10 kg
- Dissolved solids [water, surface water]: 2.4845e-9 kg
- Fluoride [water, ocean]: 3.15825e-9 kg
- Fluoride [water, surface water]: 4.23258e-9 kg
- Iron ion [water, ocean]: 3.4774e-10 kg
- Iron ion [water, surface water]: 1.55496e-9 kg
- Lead II [water, ocean]: 4.62162e-11 kg
- Lead II [water, surface water]: 3.80307e-10 kg
- Magnesium [water, surface water]: 9.79836e-8 kg
- Manganese II [water, surface water]: 9.5171e-9 kg
- Mercury II [water, ocean]: 7.27651e-12 kg
- Mercury II [water, surface water]: 9.51085e-12 kg
- Methanol [water, unspecified]: 2.41453e-13 kg
- Nickel II [water, ocean]: 6.64797e-12 kg
- Nickel II [water, surface water]: 3.30108e-13 kg
- Nickel II [water, unspecified]: 2.11538e-13 kg
- Nitrate [water, ocean]: 4.51774e-10 kg
- Nitrate [water, surface water]: 2.24387e-8 kg
- Nitrogen [water, ocean]: 8.77583e-9 kg
- Nitrogen [water, surface water]: 7.04419e-8 kg
- Nitrogen [water, unspecified]: 2.16714e-9 kg
- Nitrogen dioxide [water, surface water]: 2.55691e-11 kg
- Oils, unspecified [water, unspecified]: 3.35364e-10 kg
- Phenol [water, surface water]: 1.53415e-12 kg
- Phenol [water, unspecified]: 2.84098e-15 kg
- Phosphorus [water, surface water]: 2.1505e-9 kg
- Phosphorus [water, unspecified]: 7.58386e-11 kg
- Selenium IV [water, surface water]: 2.77917e-11 kg
- Sodium I [water, surface water]: 1.5668e-7 kg
- Sulfate [water, surface water]: 9.55088e-7 kg
- Sulfide [water, unspecified]: 5.73853e-11 kg
- Sulfur [water, unspecified]: 1.44151e-16 kg
- Sulfuric acid [water, surface water]: 7.16379e-7 kg
- Suspended solids, unspecified [water, surface water]: 2.02655e-7 kg
- Suspended solids, unspecified [water, unspecified]: 2.813e-9 kg
- TOC, Total Organic Carbon [water, surface water]: 1.13476e-6 kg
- TOC, Total Organic Carbon [water, unspecified]: 2.31297e-10 kg
- Thallium I [water, ocean]: 2.07978e-11 kg
- Triethylene glycol [water, unspecified]: 7.26762e-13 kg
- Water [water, surface water]: 2.34032e-7 m3
- Water [water, unspecified]: 0.000223762 m3
- Zinc II [water, ocean]: 1.79968e-9 kg
- Zinc II [water, surface water]: 3.31278e-9 kg
- Zinc II [water, unspecified]: 5.80604e-13 kg
