# tillage, harrowing, by offset disc harrow

Dataset: EcoSpold 2, unit process
Geography: CA
Time period: 2019-01-01 to 2022-12-31
Technology level: current
Classification: ISIC rev.4 ecoinvent: 0161:Support activities for crop production
Scenario: Business-as-Usual
System model: Allocation at the point of substitution
Generated by: Avraam Symeonidis
Published in: Cavalett O. 2016
Database: ecoinvent
isCopyrightProtected: true

## General comment
This dataset represents the harrowing operation in one hectare (ha). This tillage operation is mainly performed to break up the surface of the soil and to incorporate the limestone and gypsum. Functional Unit (FU) is one hectare of tillage harrowing. The operation time is about 1.38 hours per ha (62.5% of this time is effectively worked, discounting time for maintenance, waiting in the field and re-allocations between the plots).
Dataset exchanges scaled from GLO dataset based on diesel consumption in Canada. Created to proxy farm machinery/fieldwork representative of the Canadian context.

## Included activities start
From agricultural field foreseen to be processed.

## Included activities end
This activity ends with harrowing. The dataset includes the diesel fuel consumption (26.04 L of diesel per hour of effective operation) and the amount of agricultural machinery and shed. Also taken into consideration is the amount of emissions to the air from diesel combustion and the emission to the soil from tyre abrasion during the work process.

## Technology
This activity is performed with a tractor (power 220 hp; weight 9450 kg) plus a disc harrow implement (18 discs of diameter 32''; weight 2862 kg). Life spam of the tractor is considered as 13250 operating hours and of the implement as 8000 operating hours. Machinery used, fuel consumption and operation efficiencies were based on data from sugarcane mills in Brazil, expert's informations and unpublished data.

## Time period
Most of the data used to modelling this activity were collected in the last few years (2012-2014). Diesel consumption data refer to year of 2019.

## Reference product
- tillage, harrowing, by offset disc harrow: 1 ha; By-product classification allocatable product; CPC 86119: Other support services to crop production
  production volume 4.55123e7 ha
    GDP scaled from the respective global value assuming that Canada accounts for 2.4% of the global GDP. Gobal area of sugarcane, arable crops, permanent meadows and pasture, year 2014, according to the FAOSTAT data. This operation is assumed to occur every 5 year in sugarcane and every 7 years in permanent meadows and pasture.
  property price 15.83 EUR2005
    Calculated based on inputs: The price of the product has been calculated as a sum of the values of the material and energy inputs for this product. This value is therefore a rough estimation. It may underestimate the real price since there are additional expenses when producing any product. These expences can include for example labour costs, treatment of waste materials and profit for the producer. Please consider carefully whether this level of data quality is acceptable for your application.
  properties: carbon allocation 0 kg, carbon content 0

## Inputs from technosphere
- agricultural machinery, tillage: 0.493448 kg; source Otávio Cavalett 2016; lognormal variance with pedigree 0.0034, pedigree (2,3,2,5,1)
  Proxy, based on data from sugarcane mills in Brazil, expert's informations and unpublished data. The main source of data for agricultural inputs and operations modelling prodedures is detailed in Cavalett et al., 2016.
- diesel: 1.23615 kg; source Otávio Cavalett 2016; lognormal variance with pedigree 0.0034, pedigree (2,3,2,5,1)
  (same comment as for agricultural machinery, tillage)
  property calculation property, kg 0 kg; name m_diesel
  properties: carbon content, fossil 0.865, dry mass 1 kg, heating value, net 42.8 MJ, wet mass 1 kg
  note on calculation property, kg: Mass output. Defined here for use in the combined production calculations.
  note on carbon content, fossil: C-content of diesel is 86.5% (ecoinvent v2.2 report 6_IV, Tab 3.14)
- shed: 0.002 m2; lognormal variance with pedigree 0.0128, pedigree (3,3,2,5,3)
  Proxy, based on ecoinvent database.
- tractor, 4-wheel, agricultural: 0.983735 kg; source Otávio Cavalett 2016; lognormal variance with pedigree 0.0034, pedigree (2,3,2,5,1)
  (same comment as for agricultural machinery, tillage)

## Emissions to nature
All rows: source Nemecek, T. 2007
- Ammonia [air, non-urban air or from high stacks]: 2.46912e-5 kg; = 0.000382* diesel/19.1246971; lognormal variance with pedigree 0.0623, pedigree (3,2,2,5,3)
  Air emissions are adjusted based on diesel amount used by this service activity.
- Benzene [air, non-urban air or from high stacks]: 9.04912e-6 kg; = 0.00014* diesel/19.1246971; lognormal variance with pedigree 0.0623, pedigree (3,2,2,5,3)
  Air emissions are adjusted based on diesel amount used by this service activity.
- Benzo(a)pyrene [air, non-urban air or from high stacks]: 3.71014e-8 kg; = 0.000000574* diesel/19.1246971; lognormal variance with pedigree 0.6623, pedigree (3,2,2,5,3)
  Air emissions are adjusted based on diesel amount used by this service activity.
- Cadmium II [air, non-urban air or from high stacks]: 1.23456e-8 kg; = 0.000000191* diesel/19.1246971; lognormal variance with pedigree 0.6623, pedigree (3,2,2,5,3)
  Air emissions are adjusted based on diesel amount used by this service activity.
- Carbon dioxide, fossil [air, non-urban air or from high stacks]: 3.8588 kg; = 59.7* diesel/19.1246971; lognormal variance with pedigree 0.0223, pedigree (3,2,2,5,3)
  Air emissions are adjusted based on diesel amount used by this service activity.
- Carbon monoxide, fossil [air, non-urban air or from high stacks]: 0.00667502 kg; = 0.10327* diesel/19.1246971; lognormal variance with pedigree 0.6623, pedigree (3,2,2,5,3)
  Air emissions are adjusted based on diesel amount used by this service activity.
- Chromium III [air, non-urban air or from high stacks]: 6.17925e-8 kg; = 0.000000956* diesel/19.1246971; lognormal variance with pedigree 0.6623, pedigree (3,2,2,5,3)
  Air emissions are adjusted based on diesel amount used by this service activity.
- Copper ion [air, non-urban air or from high stacks]: 2.10069e-6 kg; = 0.0000325* diesel/19.1246971; lognormal variance with pedigree 0.6623, pedigree (3,2,2,5,3)
  Air emissions are adjusted based on diesel amount used by this service activity.
- Dinitrogen monoxide [air, non-urban air or from high stacks]: 0.000148018 kg; = 0.00229* diesel/19.1246971; lognormal variance with pedigree 0.0623, pedigree (3,2,2,5,3)
  Air emissions are adjusted based on diesel amount used by this service activity.
- Methane, fossil [air, non-urban air or from high stacks]: 0.000159652 kg; = 0.00247* diesel/19.1246971; lognormal variance with pedigree 0.0623, pedigree (3,2,2,5,3)
  Air emissions are adjusted based on diesel amount used by this service activity.
- NMVOC, non-methane volatile organic compounds [air, non-urban air or from high stacks]: 0.0037082 kg; = 0.05737* diesel/19.1246971; lognormal variance with pedigree 0.0623, pedigree (3,2,2,5,3)
  Air emissions are adjusted based on diesel amount used by this service activity.
- Nickel II [air, non-urban air or from high stacks]: 8.6613e-8 kg; = 0.00000134* diesel/19.1246971; lognormal variance with pedigree 0.6623, pedigree (3,2,2,5,3)
  Air emissions are adjusted based on diesel amount used by this service activity.
- Nitrogen oxides [air, non-urban air or from high stacks]: 0.0525366 kg; = 0.8128* diesel/19.1246971; lognormal variance with pedigree 0.0523, pedigree (3,2,2,5,3)
  Air emissions are adjusted based on diesel amount used by this service activity.
- PAH, polycyclic aromatic hydrocarbons [air, non-urban air or from high stacks]: 4.06564e-6 kg; = 0.0000629* diesel/19.1246971; lognormal variance with pedigree 0.3223, pedigree (3,2,2,5,3)
  Air emissions are adjusted based on diesel amount used by this service activity.
- Particulate Matter, < 2.5 um [air, non-urban air or from high stacks]: 0.0104724 kg; = 0.16202* diesel/19.1246971; lognormal variance with pedigree 0.0623, pedigree (3,2,2,5,3)
  Air emissions are adjusted based on diesel amount used by this service activity.
- Selenium IV [air, non-urban air or from high stacks]: 1.23456e-8 kg; = 0.000000191* diesel/19.1246971; lognormal variance with pedigree 0.0623, pedigree (3,2,2,5,3)
  Air emissions are adjusted based on diesel amount used by this service activity.
- Sulfur dioxide [air, non-urban air or from high stacks]: 0.00124749 kg; = 0.0193* diesel/19.1246971; lognormal variance with pedigree 0.0223, pedigree (3,2,2,5,3)
  Air emissions are adjusted based on diesel amount used by this service activity.
- Zinc II [air, non-urban air or from high stacks]: 1.23456e-6 kg; = 0.0000191* diesel/19.1246971; lognormal variance with pedigree 0.6623, pedigree (3,2,2,5,3)
  Air emissions are adjusted based on diesel amount used by this service activity.
- Cadmium II [soil, agricultural]: 6.28e-5 kg; lognormal variance with pedigree 0.0462, pedigree (3,4,2,5,1)
  Proxy, based on 'Agricultural Field Work Processes'from Nemecek and Kagi, 2007.
- Lead II [soil, agricultural]: 0.000272 kg; lognormal variance with pedigree 0.0462, pedigree (3,4,2,5,1)
  Proxy, based on 'Agricultural Field Work Processes'from Nemecek and Kagi, 2007.
- Zinc II [soil, agricultural]: 0.00167 kg; lognormal variance with pedigree 0.0462, pedigree (3,4,2,5,1)
  Proxy, based on 'Agricultural Field Work Processes'from Nemecek and Kagi, 2007.

## Sampling procedure
The main source of data for agricultural inputs and operations modelling procedures is detailed in Cavalett et al., 2016. Emissions from the agricultural process are estimated according to Nemecek and Kagi, 2007.

## Extrapolations
Extrapolated from Brazilian data, uncertainty adjusted accordingly.
