# treatment of sewage sludge, 97% water, WWT, WW from pig iron production, landfarming

Dataset: EcoSpold 2, unit process
Geography: RoW
Time period: 2000-01-01 to 2022-12-31
Technology level: current
Classification: ISIC rev.4 ecoinvent: 3821:Treatment and disposal of non-hazardous waste
Scenario: Business-as-Usual
System model: Allocation at the point of substitution
Generated by: Nikolia Stoikou
Database: ecoinvent
isCopyrightProtected: true

## General comment
The process represents the treatment of a waste (sewage sludge) that is exclusively produced from another waste treatment. Recommended use of this dataset: to be used within the specific chain of treatments for 'wastewater from pig iron production'. Share of biogenic carbon in the sludge: 0%.

## Included activities start
The activity starts with the waste being available for landfarming. Collection and transportation of the waste to this process is not included.

## Included activities end
The activity ends with the waste being treated and waste-specific emissions from the landfarming process are released to the environment (air, water and soil). The activity is considering local fate of emissions and the initial specific wastewater composition (generating the sewage sludge). Further, it includes provision of fertiliser functions for N, P, K, if present in the sludge.

## Geography
The site has mean annual temperature (MAT) of 16.743579766537 degC, mean annual precipitation (MAP) of 1250.84108527132 mm/year, mean annual actual evaporation (EAT) of 460.58904958214 mm/year. Climate will influence the local fate emissions based on the elemental composition of the sludge as well as water evaporation to air (= consumptive water use).
References: UN data, 2020. Precipitation, Environment Statistics Database, United Nations Statistics Division Available at: http://data.un.org/Data.aspx?q=precipitation&d=ENV&f=variableID%3a6;
World Bank, 2022. Surface area (sq.km), World Bank Group Available at: https://data.worldbank.org/indicator/AG.SRF.TOTL.K2;
Doka G.,2021. A model for composition-specific life cycle inventories of regionalised wastewater fates, Zurich, Switzerland. http://www.doka.ch/publications.htm

## Technology
Landfarming is the process of spreading a substrate on agricultural soil. Sewage sludge is generated in the wastewater treatment of wastewater from pig iron production. Spreading of liquid sewage sludge (97w% water content) on agricultural fields with mobile vacuum tanker.

## Reference product
- organic nitrogen fertiliser, as N: 1 kg; By-product classification allocatable product; CPC 34659: Fertilizers n.e.c.
  gross fertilizer function provided from sewage sludge spreading on agricultural fields.
  production volume 25.3325 kg
    Calculated in proportion to wastewater reference product.
  property nitrogen content 1
    Nitrogen content (on a dry matter basis) of organic nitrogen fertiliser, as N is calculated from the molecular formula of the substance (Nitrogen).
  property price 0.473 EUR2005
    Set equal to the price of the corresponding inorganic fertiliser
  properties: carbon allocation 0 kg, carbon content 0, carbon content, fossil 0, carbon content, non-fossil 0, dry mass 1 kg, water content 0, water in wet mass 0 kg, wet mass 1 kg

## Inputs from technosphere
- aluminium oxide factory: 5.12406e-12 unit
- aluminium, wrought alloy: 5.55407e-6 kg
- argon, liquid: 7.39472e-6 kg
- basic oxygen furnace dust: -0.00650497, -0.0102178 kg (2 suppliers, which the file names only by identifier); sum of these -0.0167228 kg
- basic oxygen furnace dust, for recovery: 0.00175825 kg
- basic oxygen furnace secondary metallurgy slag: -0.000259343 kg
- basic oxygen furnace secondary metallurgy slag, for recovery: 9.81257e-6 kg
- basic oxygen furnace slag: -0.0904404 kg
- basic oxygen furnace slag, for recovery: 0.00246453 kg
- basic oxygen furnace sludge: -0.000259343 kg
- basic oxygen furnace sludge, for recovery: 2.75244e-5 kg
- basic oxygen furnace waste: -0.000211835 kg
- blast furnace: 2.69698e-12 unit
- blast furnace dust: -0.00149662 kg
- blast furnace dust, for recovery: 0.00119976 kg
- blast furnace gas: -0.148339 MJ
- blast furnace slag: -0.0500951 kg
- blast furnace sludge: -0.000763615, -0.00413431 kg (2 suppliers, which the file names only by identifier); sum of these -0.00489793 kg
- blast furnace sludge, for recovery: 0.000867968 kg
- blast oxygen furnace converter: 1.14954e-11 unit
- blasting: 2.02192e-7 kg
- calcium carbide, technical grade: 1.2056e-5 kg
- chemical, organic: 6.29035e-6 kg
- coke: 1.99185 MJ
- compressed air, 600 kPa gauge: 0.0124345 m3
- compressed air, 800 kPa gauge: 0.000388889 m3
- conveyor belt: 7.27158e-11 m
- copper, cathode: 5.04916e-8 kg
- diesel: 6.47022e-6, 8.61078e-9, 1.75946e-9, 1.2173e-9, 1.71604e-7, 4.13956e-10 kg (6 suppliers, which the file names only by identifier); sum of these 6.65383e-6 kg
- diesel, burned in building machine: 0.000421377 MJ
- dolomite: 0.00438026 kg
- electric arc furnace secondary metallurgy slag, for recovery: 0.000246538 kg
- electric arc furnace slag, for recovery: 0.000307358 kg
- electricity, medium voltage: 1.92782e-5, 2.60304e-5, 3.74366e-5, 7.81462e-6, 0.000457728, 0.0115734, 2.4721e-5, 9.25722e-6, 0.000116818, 0.00361127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 kWh (46 suppliers, which the file names only by identifier); sum of these 0.0515426 kWh
- electrode, negative, Ni: 3.28195e-7 kg
- ferromanganese, high-coal, 74.5% Mn: 0.00575965 kg
- ferronickel: 0.002845 kg
- ferrosilicon: 4.81506e-7 kg
- graphite: 1.22333e-5 kg
- hard coal: 0.0162522, 0.00326072, 0.00147852, 0.0104639, 0.0015088, 0.00220431, 0.000641633, 0.000350843 kg (8 suppliers, which the file names only by identifier); sum of these 0.0361609 kg
- heat, district or industrial, natural gas: 0.000280654 MJ
- heat, district or industrial, other than natural gas: 0.00190612, 0.00476535 MJ (2 suppliers, which the file names only by identifier); sum of these 0.00667146 MJ
- industrial machine, heavy, unspecified: 1.60079e-8 kg
- inert waste: -7.60694e-6 kg
- inert waste, for final disposal: -0.0114095 kg
- iron ore concentrate: 0.200568, 0.0220007 kg (2 suppliers, which the file names only by identifier); sum of these 0.222569 kg
- iron pellet: 0.0523004, 0.0530898 kg (2 suppliers, which the file names only by identifier); sum of these 0.10539 kg
- iron scrap, sorted, pressed: 0.198019 kg
- iron sinter: 0.0310377, 0.139361 kg (2 suppliers, which the file names only by identifier); sum of these 0.170398 kg
- lime: 0.000145508 kg
- lime, hydrated, loose weight: 0.005411 kg
- limestone, unprocessed: 9.00767e-5, 0.0281978 kg (2 suppliers, which the file names only by identifier); sum of these 0.0282879 kg
- liquefied petroleum gas: 4.09957e-8, 2.86446e-9, 4.26882e-9, 1.28695e-8, 6.09392e-7 kg (5 suppliers, which the file names only by identifier); sum of these 6.7039e-7 kg
- manganese: 1.28524e-6 kg
- mill scale: -5.71624e-5 kg
- mine infrastructure, open cast, ilmenite from hard-rock ore: 4.02409e-14 unit
- molybdenite: 3.77114e-5 kg
- natural gas, high pressure: 1.46547e-5, 6.18581e-6, 3.54278e-5, 1.05136e-5, 0.000594764, 6.07896e-5, 6.63568e-6, 1.95809e-7, 2.35623e-5, 2.47432e-5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 m3 (24 suppliers, which the file names only by identifier); sum of these 0.00177852 m3
- nickel, class 1: 3.69048e-8 kg
- nitrogen, liquid: 0.00290592 kg
- non-sulfidic tailing, off-site: -0.0133 kg
- oxygen, liquid: 0.0705613 kg
- petrol, unleaded, burned in machinery: 1.486e-7 MJ
- petroleum coke: 9.17953e-5 kg
- pig iron: 0.745668 kg
- pitch: 5.10177e-5 kg
- propane: 7.918e-7 kg
- quicklime, in pieces, loose: 0.0407447 kg
- recultivation, ilmenite mine: 1.08446e-7 m2
- refractory, fireclay, packed: 0.000265449 kg
- sponge iron: 4.9344e-5, 1.18078e-7 kg (2 suppliers, which the file names only by identifier); sum of these 4.94621e-5 kg
- steam, in chemical industry: 0.00491498 kg
- transport, freight, lorry, unspecified: 5.71165e-5 metric ton*km
- wastewater from pig iron production: -0.00126048 m3
- wastewater, average: -4.49457e-9, -1.26239e-6 m3 (2 suppliers, which the file names only by identifier); sum of these -1.26688e-6 m3

## Inputs from nature
- Gangue [natural resource, in ground]: 0.0109253 kg
- Iron [natural resource, in ground]: 0.00419413 kg
- Occupation, mineral extraction site [natural resource, land]: 3.25338e-6 m2*year
- Oxygen [natural resource, in air]: 0.0242329 kg
- Titanium [natural resource, in ground]: 0.000743415 kg
- Transformation, from forest, unspecified [natural resource, land]: 1.08446e-7 m2
- Transformation, to mineral extraction site [natural resource, land]: 1.08446e-7 m2
- Water, cooling, unspecified natural origin [natural resource, in water]: 0.00512007 m3
- Water, unspecified natural origin [natural resource, in ground]: 8.94155e-5 m3
- Water, unspecified natural origin [natural resource, in water]: 8.06464e-5 m3

## Emissions to nature
- Arsenic ion [air, unspecified]: 6.14887e-10 kg
- Benzo(a)pyrene [air, unspecified]: 4.1754e-10 kg
- Cadmium II [air, unspecified]: 1.52473e-9 kg
- Carbon dioxide, fossil [air, unspecified]: 0.267261 kg
- Carbon monoxide, fossil [air, non-urban air or from high stacks]: 0.000288204 kg
- Carbon monoxide, fossil [air, unspecified]: 0.00541628 kg
- Chromium III [air, unspecified]: 2.79614e-8 kg
- Copper ion [air, unspecified]: 1.26494e-7 kg
- Dioxins, measured as 2,3,7,8-tetrachlorodibenzo-p-dioxin [air, unspecified]: 3.73044e-13 kg
- Heat, waste [air, unspecified]: 0.176485 MJ
- Hydrochloric acid [air, unspecified]: 7.06047e-6 kg
- Hydrogen fluoride [air, unspecified]: 3.71202e-7 kg
- Hydrogen sulfide [air, unspecified]: 2.17348e-6 kg
- Iron ion [air, unspecified]: 3.54786e-5 kg
- Lead II [air, unspecified]: 4.44686e-7 kg
- Manganese II [air, unspecified]: 6.13662e-7 kg
- Mercury II [air, unspecified]: 9.32522e-10 kg
- Methane, fossil [air, unspecified]: 2.48028e-5 kg
- NMVOC, non-methane volatile organic compounds [air, unspecified]: 4.05468e-6 kg
- Nickel II [air, unspecified]: 6.32452e-9 kg
- Nitrogen oxides [air, unspecified]: 0.000148848 kg
- PAH, polycyclic aromatic hydrocarbons [air, unspecified]: 1.08514e-8 kg
- Particulate Matter, < 2.5 um [air, non-urban air or from high stacks]: 2.32037e-8 kg
- Particulate Matter, < 2.5 um [air, unspecified]: 6.90676e-5 kg
- Particulate Matter, > 10 um [air, non-urban air or from high stacks]: 3.15738e-7 kg
- Particulate Matter, > 10 um [air, unspecified]: 1.95433e-5 kg
- Particulate Matter, > 2.5 um and < 10um [air, non-urban air or from high stacks]: 1.25134e-7 kg
- Particulate Matter, > 2.5 um and < 10um [air, unspecified]: 4.34055e-6 kg
- Polychlorinated biphenyls [air, unspecified]: 1.35353e-11 kg
- Selenium IV [air, unspecified]: 1.0505e-8 kg
- Sulfur dioxide [air, unspecified]: 0.000121721 kg
- Titanium ion [air, unspecified]: 1.34871e-9 kg
- Vanadium V [air, unspecified]: 1.99878e-9 kg
- Water [air, non-urban air or from high stacks]: 2.32268e-6 m3
- Water [air, unspecified]: 0.00535812 m3
- Water [water, unspecified]: 0.000128777 m3
