# treatment of wastewater from glass production, wastewater treatment

Dataset: EcoSpold 2, unit process
Geography: RoW
Time period: 2010-01-01 to 2022-12-31
Technology level: current
Classification: ISIC rev.4 ecoinvent: 3700:Sewerage
Scenario: Business-as-Usual
System model: Allocation at the point of substitution
Generated by: Nikolia Stoikou
Database: ecoinvent
isCopyrightProtected: true

## General comment
This dataset represents the treatment of a wastewater, generated from an ordinary transforming activity. Purification in wastewater treatment of 'wastewater from glass production'. Recommended use of this dataset: to be used for wastewaters, generated from ordinary transforming activities, of equal or similar composition. The wastewater has a content of TOC: 0.029492 kg/m3, COD: 0.11498 kg/m3 and BOD: 0.05561 kg/m3. TOC is equal to C present in the wastewater, COD is calculated as TOC/0.2565 and BOD is calculated as COD/0.53034. Detailed elemental composition can be found in the properties of the wastewater treated. Share of biogenic carbon in the sludge: 0%.

## Included activities start
The activity starts with the wastewater being available at the gate of the treatment facility. Collection and transportation of the wastewater to the treatment plant is not included.

## Included activities end
The activity ends with the wastewater being treated and waste-specific emissions released to the environment. Expenditures from treatment of wastewater in waste treatment plant are included as well as relevant infrastructure of the plant. Emissions from any sludge digestion, biogas generation and utilization (heeding specific wastewater composition) are also included. Waste-specific direct emissions of untreated wastewater and required territory-specific infrastructure for sewers are not contained within this dataset but instead in the regional market datasets for this wastewater.

## Geography
The site has mean annual temperature (MAT) of 16.743579766537 degC, mean annual precipitation (MAP) of 1250.84108527132 mm/year, mean annual actual evaporation (EAT) of 460.58904958214 mm/year. In the WWT plant, 0% of its water input are lost due to evaporation from pools, 0.00145% of water is *gained* from organic mass degradation, and 0.00325% is removed off site via sludge disposal. (References: UN data, 2020. Precipitation, Environment Statistics Database, United Nations Statistics Division Available at: http://data.un.org/Data.aspx?q=precipitation&d=ENV&f=variableID%3a6; World Bank, 2022. Surface area (sq.km), World Bank Group Available at: https://data.worldbank.org/indicator/AG.SRF.TOTL.K2; Doka G.,2021. A model for composition-specific life cycle inventories of regionalised wastewater fates, Zurich, Switzerland. http://www.doka.ch/publications.htm)

## Technology
This is an inventory for the disposal of a selected wastewater in Global. The reference unit is 1 m3 wastewater input. This activity represents the treatment of a specific wastewater in a WWT plant (while direct emissions and sewering are heeded in the upstream market dataset for this wastewater). The size of the treatment plant infrastructure is for a supranational region average territory situation. The assumed size of the WWTP treats 82.2 Mio m3 per year. The mixture of WWTP with one, two, or three stages is 8.2%-41.2%-50.6%. The actual, waste-specific oxygen requirement in the biological stages is 0.020956035 kg O. The digestion process produces 4.0332365 litres of biogas with an energy content of 0.08408752MJ. 60.5% of the biogas is utilized for energy. The remainder is flared. The gross electric efficiency is 26.564%. The gross thermal efficiency is 47.853%. After digestion, the remaining total sludge mass (dry matter) is 0.05763kg DM.

## Reference product
- iron scrap, sorted, pressed: 1 kg; By-product classification Recyclable; CPC 39310: Slag, dross, scalings and other waste from the manufacture of iron or steel; lognormal variance with pedigree 0.3611, pedigree (1,1,1,1,1)
  scrap output from used infrastructure for wastewater treatment plant.
  Uncertainty: Uncertainty calculated from wastewater technosphere fate uncertainty and treatment infrastructure uncertainty.
  production volume 30569.9 kg
    Calculated in proportion to wastewater reference product.
  property price 0.175 EUR2005
    Temporary price data. Calculated as 90% of purchasers price based on: 2005 import and export prices (total trades (USD) divided by total weight (kg) in biggest economies of the world: EU27, USA, Brasil, China, India, Japan and Russia) from UN Commodity Trade Statistics Database (http://data.un.org/Explorer.aspxDatabase [Accessed 2011.06.20]). Commodity: Waste or scrap, of cast iron
  properties: carbon allocation 0 kg, carbon content 0, carbon content, fossil 0, carbon content, non-fossil 0, dry mass 1 kg, water content 0, water in wet mass 0 kg, wet mass 1 kg

## Inputs from technosphere
- EUR-flat pallet: 0.000248922, 0.000106368 unit (2 suppliers, which the file names only by identifier); sum of these 0.000355291 unit
- chemical, inorganic: 0.00993189 kg
- diesel: 4.84076e-5, 2.39852e-5, 4.90093e-6, 3.39075e-6, 0.000478, 1.15307e-6 kg (6 suppliers, which the file names only by identifier); sum of these 0.000559838 kg
- dolomite: 0.0215079, 0.00629797 kg (2 suppliers, which the file names only by identifier); sum of these 0.0278059 kg
- electricity, medium voltage: 0.000577531, 0.00162543, 0.000155378, 4.3285e-5, 0.000528113, 0.0175868, 7.33309e-5, 0.00279173, 0.00548765, 0.00350002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 kWh (44 suppliers, which the file names only by identifier); sum of these 0.110154 kWh
- feldspar: 0.0108665 kg
- glass cullet, sorted: 0.0884373, 0.180287 kg (2 suppliers, which the file names only by identifier); sum of these 0.268724 kg
- graphite: 1.25997e-6 kg
- heavy fuel oil: 0.0120995, 0.000101812, 0.000517592, 0.000671137, 0.000130609, 0.00017484, 0.00585229 kg (7 suppliers, which the file names only by identifier); sum of these 0.0195478 kg
- light fuel oil: 0.011311, 0.00566307, 0.00112271, 0.00010795, 8.02245e-5, 7.45014e-5, 0.00055628 kg (7 suppliers, which the file names only by identifier); sum of these 0.0189157 kg
- lime: 0.00481192, 0.0154983 kg (2 suppliers, which the file names only by identifier); sum of these 0.0203103 kg
- lime, hydrated, loose weight: 0.000125969 kg
- lubricating oil: 7.52776e-6 kg
- municipal solid waste: -4.16952e-6, -1.30355e-5, -1.96747e-6, -2.45412e-6, -9.12754e-6, -1.9161e-5, -1.09592e-6, -1.66437e-6, -8.45915e-6, -1.46531e-5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 kg (38 suppliers, which the file names only by identifier); sum of these -0.00248297 kg
- natural gas, high pressure: 0.000238568, 9.29941e-5, 0.0001007, 0.000576738, 0.000171154, 0.00968231, 0.000989609, 0.000314256, 0.00067626, 0.000571762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 m3 (43 suppliers, which the file names only by identifier); sum of these 0.041325 m3
- packaging glass factory: 1.68946e-11, 3.95366e-11 unit (2 suppliers, which the file names only by identifier); sum of these 5.64312e-11 unit
- polyethylene, high density, granulate: 0.0058237 kg
- portachrom: 7.83589e-5 kg
- portafer: 4.76106e-5 kg
- refractory, fireclay, packed: 0.00645573 kg
- selenium: 1.90323e-6 kg
- silica sand: 0.108732 kg
- soda ash, light: 0.0391325 kg
- solid bleached and unbleached board carton: 0.00610445, 0.00260853 kg (2 suppliers, which the file names only by identifier); sum of these 0.00871297 kg
- tap water: 5.92647e-5, 0.00246978, 9.79447e-5, 0.00018276, 0.0282629, 6.42506e-5, 0.000492342 kg (7 suppliers, which the file names only by identifier); sum of these 0.0316293 kg
- wastewater from glass production: -0.000794551 m3

## Inputs from nature
- Water, unspecified natural origin [natural resource, in water]: 0.00089387 m3

## Emissions to nature
- Ammonia [air, urban air close to ground]: 8.28686e-9 kg
- Antimony ion [air, urban air close to ground]: 3.04277e-8 kg
- Arsenic ion [air, urban air close to ground]: 3.04277e-8 kg
- Benzene [air, urban air close to ground]: 4.74242e-7 kg
- Benzo(a)pyrene [air, urban air close to ground]: 4.51561e-11 kg
- Cadmium II [air, urban air close to ground]: 3.04277e-8 kg
- Carbon dioxide, fossil [air, urban air close to ground]: 0.248475 kg
- Carbon monoxide, fossil [air, urban air close to ground]: 1.03859e-5 kg
- Chromium III [air, urban air close to ground]: 3.04277e-8 kg
- Cobalt II [air, urban air close to ground]: 3.04277e-8 kg
- Copper ion [air, urban air close to ground]: 3.04277e-8 kg
- Dinitrogen monoxide [air, urban air close to ground]: 9.03088e-7 kg
- Dioxins, measured as 2,3,7,8-tetrachlorodibenzo-p-dioxin [air, urban air close to ground]: 5.64419e-16 kg
- Formaldehyde [air, urban air close to ground]: 6.4346e-7 kg
- Hydrocarbons, aliphatic, alkanes, unspecified [air, urban air close to ground]: 3.76388e-6 kg
- Hydrochloric acid [air, urban air close to ground]: 2.2437e-5 kg
- Hydrogen fluoride [air, urban air close to ground]: 8.12609e-6 kg
- Lead II [air, urban air close to ground]: 3.48519e-7 kg
- Manganese II [air, urban air close to ground]: 3.04277e-8 kg
- Methane, fossil [air, urban air close to ground]: 5.19276e-6 kg
- NMVOC, non-methane volatile organic compounds [air, urban air close to ground]: 1.39801e-6 kg
- Nickel II [air, urban air close to ground]: 3.04277e-8 kg
- Nitrogen oxides [air, urban air close to ground]: 0.000948044 kg
- Particulate Matter, < 2.5 um [air, urban air close to ground]: 0.000113765 kg
- Particulate Matter, > 10 um [air, urban air close to ground]: 7.22319e-6 kg
- Particulate Matter, > 2.5 um and < 10um [air, urban air close to ground]: 5.86884e-6 kg
- Selenium IV [air, urban air close to ground]: 3.30912e-6 kg
- Sulfur dioxide [air, urban air close to ground]: 0.00155299 kg
- Water [air, unspecified]: 0.000128418 m3
- AOX, Adsorbable Organic Halogen [water, surface water]: 3.16293e-8 kg
- BOD5, Biological Oxygen Demand [water, surface water]: 3.16293e-6 kg
- COD, Chemical Oxygen Demand [water, surface water]: 3.16293e-6 kg
- Copper ion [water, surface water]: 3.16293e-10 kg
- DOC, Dissolved Organic Carbon [water, surface water]: 3.16293e-6 kg
- Nitrite [water, surface water]: 3.16293e-8 kg
- Oils, unspecified [water, surface water]: 3.16293e-7 kg
- Sulfate [water, surface water]: 3.16293e-7 kg
- Suspended solids, unspecified [water, surface water]: 3.16293e-7 kg
- TOC, Total Organic Carbon [water, surface water]: 3.16293e-6 kg
- Water [water, unspecified]: 2.53034e-6 m3
- Zinc II [water, surface water]: 3.16293e-9 kg
