# electricity, high voltage, hydro, run-of-river, import from France

Dataset: EcoSpold 2, unit process
Geography: CH
Time period: 2010-01-01 to 2022-12-31
Technology level: current
Classification: ISIC rev.4 ecoinvent: 3510:Electric power generation, transmission and distribution
Scenario: Business-as-Usual
System model: Allocation at the point of substitution
Generated by: Karin Treyer
Database: ecoinvent
isCopyrightProtected: true

## General comment
This dataset represents the amount of imported electricity from hydro power, run-of-river, from France to CH. The import value is valid for 2008 and includes all electricity imports, independently whether used within the importing country, or re-exported. For a discussion of different ways of modeling electricity trade in LCI, please refer to (Itten & Frischknecht 2012).

## Included activities start
This activity represents the point of "handing over" the electricity from one country to the other at the border.

## Included activities end
This dataset doesn't include any electricity losses or transmission infrastructure as these are accounted for in the market datasets.

## Time period
The Annual Production Volume is valid for the year 2011.

## Reference product
- electricity, high voltage: 1 kWh; By-product classification allocatable product; CPC 17100: Electrical energy
  production volume 7.68517e9 kWh
    Literature data/calculated data. Based on Tab. 3.7 in Stolz, P., Frischnkecht, R. 2015. Umweltbilanz Strommix Schweiz 2011. Issued by treeze Ltd. for the Federal Office for the Environment, Switzerland.
  property price 0.0977 EUR2005
    Temporary price data. Calculated as 90% of purchasers price based on: 94% of the average price (to account for a 6% loss in transformation and transmission) for electricity for industrial consumersin 2005 (excluded taxes). From IEA.
  properties: carbon allocation 0 kg, carbon content 0

## Inputs from technosphere
- electricity, high voltage: 1 kWh
  activityLink added to better reflect the reality of the supply chain
