# treatment of zinc slag, residual material landfill

Dataset: EcoSpold 2, unit process
Geography: GLO
Time period: 2017-01-01 to 2022-12-31
Technology level: current
Classification: ISIC rev.4 ecoinvent: 3822:Treatment and disposal of hazardous waste
Scenario: Business-as-Usual
System model: Allocation at the point of substitution
Generated by: David FitzGerald
Published in: Doka G. 2009
Database: ecoinvent
isCopyrightProtected: true

## General comment
This activity represents the disposal of zinc slag in a residual material landfill. The inventoried waste contains 100% zinc slag.
Waste composition (wet, in ppm): H2O n.a.; O 242400; H n.a.; C n.a.; S n.a.; N n.a.; P n.a.; B n.a.; Cl n.a.; Br n.a.; F n.a.; I n.a.; Ag n.a.; As 263; Ba 1101; Cd 16; Co 14.85; Cr 367.95; Cu 1717.5; Hg n.a.; Mn 64050; Mo n.a.; Ni 216.95; Pb 558.5; Sb 28.75; Se n.a.; Sn n.a.; V 51.25; Zn 66600; Be 1.7; Sc n.a.; Sr n.a.; Ti n.a.; Tl n.a.; W n.a.; Si 144000; Fe 153000; Ca 27350; Al 22000; K 6600; Mg 12685; Na 807.
Reference:
a: Report for Zinc Slag Pile Remedial Investigation at the California Gulch Site Leadville, Colorado. Available at: https://semspub.epa.gov/work/08/318849.pdf
Composition taken from table 4-3, page 50.

## Included activities start
Activity starts with the reception of the slag.

## Included activities end
This activity includes waste-specific short-term emissions to water from leachate and long-term emissions from the landfill to ground water.

## Geography
Technology encountered in Switzerland in 2000. Landfill includes base seal and leachate collection system.

## Technology
Residual material landfill for polluted, inorganic waste. With base seal and leachate collection system. Recultivation after closure.

## Reference product
- zinc slag: -1 kg; By-product classification Waste; CPC 39365: Waste and scrap of zinc
  production volume 2.92922e9 kg
    Rough estimation based on the total volume of zinc slag produced by other datasets in the database.
  property price 0 EUR2005
    Waste products are assigned a price of zero as they are assumed to require further treatment.
  properties: aluminium content 0.022, antimony content 2.875e-5, arsenic content 0.000263, barium content 0.001101, beryllium content 1.7e-6, cadmium content 1.6e-5, calcium content 0.02735, carbon allocation 0 kg, carbon content 0, carbon content, fossil 0, carbon content, non-fossil 0, chromium content 0.00036795, cobalt content 1.485e-5, copper content 0.0017175, dry mass 1 kg, iron content 0.153, lead content 0.0005585, magnesium content 0.012685, manganese content 0.06405, nickel content 0.00021695, oxygen content 0.242396, potassium content 0.0066, silicon content 0.144, sodium content 0.000807, vanadium content 5.125e-5, water content 0, water in wet mass 0 kg, wet mass 1 kg, zinc content 0.0666

## Inputs from technosphere
- process-specific burdens, residual material landfill: 0.280494, 0.71109, 0.00841689 kg (3 suppliers, which the file names only by identifier); sum of these 1 kg; lognormal variance with pedigree 0.082, pedigree (1,1,5,5,4)
  Demands per kilogram of slag. The uncertainty is considered in the supplying activity.
- residual material landfill: 2.08333e-9 unit; lognormal variance with pedigree 0.082, pedigree (1,1,5,5,4)
  Demands per kilogram of slag. The uncertainty is considered in the supplying activity.

## Emissions to nature
- Aluminium III [water, ground-, long-term]: 0.00653075 kg; lognormal variance with pedigree 0.72646, pedigree (1,1,5,5,4)
  The uncertainty is calculated from uncertainties in waste composition and transfer coefficients in incinerators and landfills.
- Aluminium III [water, surface water]: 1.09028e-5 kg; lognormal variance with pedigree 1.10215, pedigree (1,1,5,5,4)
  (same comment as for Aluminium III)
- Antimony ion [water, ground-, long-term]: 1.86111e-5 kg; lognormal variance with pedigree 1.21532, pedigree (1,1,5,5,4)
  (same comment as for Aluminium III)
- Antimony ion [water, surface water]: 1.01389e-5 kg; lognormal variance with pedigree 1.23947, pedigree (1,1,5,5,4)
  (same comment as for Aluminium III)
- Arsenic ion [water, ground-, long-term]: 2.63e-13 kg; lognormal variance with pedigree 0.939131, pedigree (1,1,5,5,4)
  (same comment as for Aluminium III)
- Arsenic ion [water, surface water]: 0.000263 kg; lognormal variance with pedigree 0.915495, pedigree (1,1,5,5,4)
  (same comment as for Aluminium III)
- Barium II [water, ground-, long-term]: 9.09458e-6 kg; lognormal variance with pedigree 6.47818, pedigree (1,1,5,5,4)
  (same comment as for Aluminium III)
- Barium II [water, surface water]: 1.51829e-8 kg; lognormal variance with pedigree 1.94462, pedigree (1,1,5,5,4)
  (same comment as for Aluminium III)
- Beryllium II [water, ground-, long-term]: 6.15464e-7 kg; lognormal variance with pedigree 1.8405, pedigree (1,1,5,5,4)
  (same comment as for Aluminium III)
- Beryllium II [water, surface water]: 1.02749e-9 kg; lognormal variance with pedigree 2.30091, pedigree (1,1,5,5,4)
  (same comment as for Aluminium III)
- Cadmium II [water, ground-, long-term]: 1.08622e-7 kg; lognormal variance with pedigree 7.51887, pedigree (1,1,5,5,4)
  (same comment as for Aluminium III)
- Cadmium II [water, surface water]: 1.81339e-10 kg; lognormal variance with pedigree 2.53108, pedigree (1,1,5,5,4)
  (same comment as for Aluminium III)
- Calcium II [water, ground-, long-term]: 0.0024713 kg; lognormal variance with pedigree 1.77829, pedigree (1,1,5,5,4)
  (same comment as for Aluminium III)
- Calcium II [water, surface water]: 4.1257e-6 kg; lognormal variance with pedigree 1.23469, pedigree (1,1,5,5,4)
  (same comment as for Aluminium III)
- Chromium VI [water, ground-, long-term]: 6.98691e-5 kg; lognormal variance with pedigree 0.877664, pedigree (1,1,5,5,4)
  (same comment as for Aluminium III)
- Chromium VI [water, surface water]: 2.21184e-5 kg; lognormal variance with pedigree 1.03872, pedigree (1,1,5,5,4)
  (same comment as for Aluminium III)
- Cobalt II [water, ground-, long-term]: 2.5388e-6 kg; lognormal variance with pedigree 2.07749, pedigree (1,1,5,5,4)
  (same comment as for Aluminium III)
- Cobalt II [water, surface water]: 4.2384e-9 kg; lognormal variance with pedigree 2.11451, pedigree (1,1,5,5,4)
  (same comment as for Aluminium III)
- Copper ion [water, ground-, long-term]: 6.61143e-5 kg; lognormal variance with pedigree 3.32184, pedigree (1,1,5,5,4)
  (same comment as for Aluminium III)
- Copper ion [water, surface water]: 1.10375e-7 kg; lognormal variance with pedigree 1.68356, pedigree (1,1,5,5,4)
  (same comment as for Aluminium III)
- Iron ion [water, ground-, long-term]: 0.000766832 kg; lognormal variance with pedigree 7.17924, pedigree (1,1,5,5,4)
  (same comment as for Aluminium III)
- Iron ion [water, surface water]: 1.28019e-6 kg; lognormal variance with pedigree 1.45082, pedigree (1,1,5,5,4)
  (same comment as for Aluminium III)
- Lead II [water, ground-, long-term]: 2.897e-6 kg; lognormal variance with pedigree 7.73701, pedigree (1,1,5,5,4)
  (same comment as for Aluminium III)
- Lead II [water, surface water]: 4.83639e-9 kg; lognormal variance with pedigree 2.09474, pedigree (1,1,5,5,4)
  (same comment as for Aluminium III)
- Magnesium [water, ground-, long-term]: 0.00144131 kg; lognormal variance with pedigree 1.60365, pedigree (1,1,5,5,4)
  (same comment as for Aluminium III)
- Magnesium [water, surface water]: 2.40619e-6 kg; lognormal variance with pedigree 1.29202, pedigree (1,1,5,5,4)
  (same comment as for Aluminium III)
- Manganese II [water, ground-, long-term]: 0.000529072 kg; lognormal variance with pedigree 5.99604, pedigree (1,1,5,5,4)
  (same comment as for Aluminium III)
- Manganese II [water, surface water]: 8.83258e-7 kg; lognormal variance with pedigree 1.46249, pedigree (1,1,5,5,4)
  (same comment as for Aluminium III)
- Nickel II [water, ground-, long-term]: 7.8544e-5 kg; lognormal variance with pedigree 1.19905, pedigree (1,1,5,5,4)
  (same comment as for Aluminium III)
- Nickel II [water, surface water]: 1.31125e-7 kg; lognormal variance with pedigree 1.65945, pedigree (1,1,5,5,4)
  (same comment as for Aluminium III)
- Potassium I [water, ground-, long-term]: 0.00473956 kg; lognormal variance with pedigree 0.503596, pedigree (1,1,5,5,4)
  (same comment as for Aluminium III)
- Potassium I [water, surface water]: 0.00186044 kg; lognormal variance with pedigree 0.541901, pedigree (1,1,5,5,4)
  (same comment as for Aluminium III)
- Silicon [water, ground-, long-term]: 0.143676 kg; lognormal variance with pedigree 0.172367, pedigree (1,1,5,5,4)
  (same comment as for Aluminium III)
- Silicon [water, surface water]: 0.000323848 kg; lognormal variance with pedigree 0.72108, pedigree (1,1,5,5,4)
  (same comment as for Aluminium III)
- Sodium I [water, ground-, long-term]: 0.00050415 kg; lognormal variance with pedigree 0.773572, pedigree (1,1,5,5,4)
  (same comment as for Aluminium III)
- Sodium I [water, surface water]: 0.00030285 kg; lognormal variance with pedigree 0.794029, pedigree (1,1,5,5,4)
  (same comment as for Aluminium III)
- Vanadium V [water, ground-, long-term]: 3.93914e-5 kg; lognormal variance with pedigree 1.15026, pedigree (1,1,5,5,4)
  (same comment as for Aluminium III)
- Vanadium V [water, surface water]: 1.25778e-7 kg; lognormal variance with pedigree 1.67064, pedigree (1,1,5,5,4)
  (same comment as for Aluminium III)
- Zinc II [water, ground-, long-term]: 0.00081625 kg; lognormal variance with pedigree 5.08496, pedigree (1,1,5,5,4)
  (same comment as for Aluminium III)
- Zinc II [water, surface water]: 1.36269e-6 kg; lognormal variance with pedigree 1.40665, pedigree (1,1,5,5,4)
  (same comment as for Aluminium III)

## Sampling procedure
The waste composition was derived from literature and is given in the general comment. The unit process was created with a landfill model that is based on observed leachate concentrations in literature. The model extrapolates to 60'000 years while considering chemical characteristics.

Reference for the model:
Doka G. (2009) Life Cycle Inventories of Waste Treatment Services. ecoinvent report No. 13. Swiss Centre for Life Cycle Inventories, Dübendorf, 2009. Doka Life Cycle Assessments, Zurich, Switzerland. Available at http://www.doka.ch/publications.htm

## Review by Gabor Doka 2019-03-05
passed. Inventory adapted from 2007 eiv2.2 Excel calculation tool for Swiss residual material landfill.
Deposited slag composition is < 1 kg /kg, i.e. relevant mass gaps in waste composition. No data gap filling procedure was employed. Breadth of inventoried pollutants is however acceptable. Landfill infrastructure and process-specific demand have been corrected to represent 1kg of
