# application of plant protection product, by field sprayer

Dataset: EcoSpold 2, unit process
Geography: Canada without Quebec
Time period: 2019-01-01 to 2022-12-31
Technology level: current
Classification: ISIC rev.4 ecoinvent: 0161:Support activities for crop production
Scenario: Business-as-Usual
System model: Allocation at the point of substitution
Share of production covered: 100 %
Generated by: Avraam Symeonidis
Published in: Cavalett O. 2016
Database: ecoinvent
isCopyrightProtected: true

## General comment
This dataset represents the application of protection product in one hectare (ha). In this operation occurs the application of herbicides, fungicides and insecticides. Functional Unit (FU) is one hectare of application of plant protection product. The operation time is about 0.11 hours per ha. However, only 62.5% of this time is spent performing the operation, the remaining fraction is time for maintenance, waiting in the field and re-allocations between the field plots.
Dataset exchanges scaled from GLO dataset based on diesel consumption in Canada. Created to proxy farm machinery/fieldwork representative of the Canadian context.

## Included activities start
From agricultural field foreseen to be processed.

## Included activities end
This activity ends with agrochemical applied. The dataset includes the diesel fuel consumption (5.77 L diesel per hour of effective operation) and the amount of agricultural machinery and shed. Also taken into consideration is the amount of emissions to the air from diesel combustion and the emission to the soil from tyre abrasion during the work process.

## Technology
This activity is performed with a tractor (power 75 hp; weight 2880 kg) and a boom spayer (weight 1730 kg; width 18 m). Life spam of the tractor is considered as 13500 operating hours and of the implement as 10000 operating hours. Machinery used, fuel consumption and operation efficiencies were based on data from sugarcane mills in Brazil, expert's informations and unpublished data.

## Time period
Most of the data used to modelling this activity were collected in the last few years (2012-2014). Diesel consumption data refer to year of 2019.

## Reference product
- application of plant protection product, by field sprayer: 1 ha; By-product classification allocatable product; CPC 86119: Other support services to crop production
  production volume 4.60316e7 ha
    GDP scaled from the respective global value assuming that Canada accounts for 2.4% of the global GDP. Gobal area of sugarcane, arable crops, permanent meadows and pasture, year 2014, according to the FAOSTAT data. This operation is assumed to occur every year in sugarcane and arable land and every 7 years in permanent meadows and pasture.
  property price 3.15263 EUR2005
    Calculated based on inputs: The price of the product has been calculated as a sum of the values of the material and energy inputs for this product. This value is therefore a rough estimation. It may underestimate the real price since there are additional expenses when producing any product. These expences can include for example labour costs, treatment of waste materials and profit for the producer. Please consider carefully whether this level of data quality is acceptable for your application.
  properties: carbon allocation 0 kg, carbon content 0

## Inputs from technosphere
- agricultural machinery, unspecified: 0.0183069 kg; source Otávio Cavalett 2016; lognormal variance with pedigree 0.0034, pedigree (2,3,2,5,1)
  Proxy, based on data from sugarcane mills in Brazil, expert's informations and unpublished data. The main source of data for agricultural inputs and operations modelling prodedures is detailed in Cavalett et al., 2016.
- diesel: 8.80598 kg; source Otávio Cavalett 2016; lognormal variance with pedigree 0.0034, pedigree (2,3,2,5,1)
  (same comment as for agricultural machinery, unspecified)
  property calculation property, kg 0 kg; name m_diesel
  properties: carbon content, fossil 0.865, dry mass 1 kg, heating value, net 42.8 MJ, wet mass 1 kg
  note on calculation property, kg: Mass output. Defined here for use in the combined production calculations.
  note on carbon content, fossil: C-content of diesel is 86.5% (ecoinvent v2.2 report 6_IV, Tab 3.14)
- shed: 0.002 m2; lognormal variance with pedigree 0.0128, pedigree (3,3,2,5,3)
  Proxy, based on ecoinvent database.
- tractor, 4-wheel, agricultural: 0.022575 kg; source Otávio Cavalett 2016; lognormal variance with pedigree 0.0034, pedigree (2,3,2,5,1)
  (same comment as for agricultural machinery, unspecified)

## Emissions to nature
All rows: source Nemecek, T. 2007
- Ammonia [air, non-urban air or from high stacks]: 0.00017612 kg; = 0.00000650254* diesel/0.32512675; lognormal variance with pedigree 0.0623, pedigree (3,2,2,5,3)
  Air emissions are adjusted based on diesel amount used by this service activity.
- Benzene [air, non-urban air or from high stacks]: 6.42838e-5 kg; = 0.00000237343* diesel/0.32512675; lognormal variance with pedigree 0.0623, pedigree (3,2,2,5,3)
  Air emissions are adjusted based on diesel amount used by this service activity.
- Benzo(a)pyrene [air, non-urban air or from high stacks]: 2.64179e-7 kg; = 0.0000000097538* diesel/0.32512675; lognormal variance with pedigree 0.6623, pedigree (3,2,2,5,3)
  Air emissions are adjusted based on diesel amount used by this service activity.
- Cadmium II [air, non-urban air or from high stacks]: 8.80599e-8 kg; = 0.00000000325127* diesel/0.32512675; lognormal variance with pedigree 0.6623, pedigree (3,2,2,5,3)
  Air emissions are adjusted based on diesel amount used by this service activity.
- Carbon dioxide, fossil [air, non-urban air or from high stacks]: 27.4747 kg; = 1.01439546* diesel/0.32512675; lognormal variance with pedigree 0.0223, pedigree (3,2,2,5,3)
  Air emissions are adjusted based on diesel amount used by this service activity.
- Carbon monoxide, fossil [air, non-urban air or from high stacks]: 0.0475523 kg; = 0.001755684* diesel/0.32512675; lognormal variance with pedigree 0.6623, pedigree (3,2,2,5,3)
  Air emissions are adjusted based on diesel amount used by this service activity.
- Chromium III [air, non-urban air or from high stacks]: 4.40298e-7 kg; = 0.0000000162563* diesel/0.32512675; lognormal variance with pedigree 0.6623, pedigree (3,2,2,5,3)
  Air emissions are adjusted based on diesel amount used by this service activity.
- Copper ion [air, non-urban air or from high stacks]: 1.49702e-5 kg; = 0.000000552715* diesel/0.32512675; lognormal variance with pedigree 0.6623, pedigree (3,2,2,5,3)
  Air emissions are adjusted based on diesel amount used by this service activity.
- Dinitrogen monoxide [air, non-urban air or from high stacks]: 0.00105672 kg; = 0.0000390152* diesel/0.32512675; lognormal variance with pedigree 0.0623, pedigree (3,2,2,5,3)
  Air emissions are adjusted based on diesel amount used by this service activity.
- Methane, fossil [air, non-urban air or from high stacks]: 0.00113597 kg; = 0.0000419414* diesel/0.32512675; lognormal variance with pedigree 0.0623, pedigree (3,2,2,5,3)
  Air emissions are adjusted based on diesel amount used by this service activity.
- NMVOC, non-methane volatile organic compounds [air, non-urban air or from high stacks]: 0.0264179 kg; = 0.00097538* diesel/0.32512675; lognormal variance with pedigree 0.0623, pedigree (3,2,2,5,3)
  Air emissions are adjusted based on diesel amount used by this service activity.
- Nickel II [air, non-urban air or from high stacks]: 6.16419e-7 kg; = 0.0000000227589* diesel/0.32512675; lognormal variance with pedigree 0.6623, pedigree (3,2,2,5,3)
  Air emissions are adjusted based on diesel amount used by this service activity.
- Nitrogen oxides [air, non-urban air or from high stacks]: 0.374254 kg; = 0.013817887* diesel/0.32512675; lognormal variance with pedigree 0.0523, pedigree (3,2,2,5,3)
  Air emissions are adjusted based on diesel amount used by this service activity.
- PAH, polycyclic aromatic hydrocarbons [air, non-urban air or from high stacks]: 2.89718e-5 kg; = 0.00000106967* diesel/0.32512675; lognormal variance with pedigree 0.3223, pedigree (3,2,2,5,3)
  Air emissions are adjusted based on diesel amount used by this service activity.
- Particulate Matter, < 2.5 um [air, non-urban air or from high stacks]: 0.0922676 kg; = 0.003406623* diesel/0.32512675; lognormal variance with pedigree 0.0623, pedigree (3,2,2,5,3)
  Air emissions are adjusted based on diesel amount used by this service activity.
- Selenium IV [air, non-urban air or from high stacks]: 8.80599e-8 kg; = 0.00000000325127* diesel/0.32512675; lognormal variance with pedigree 0.0623, pedigree (3,2,2,5,3)
  Air emissions are adjusted based on diesel amount used by this service activity.
- Sulfur dioxide [air, non-urban air or from high stacks]: 0.00889404 kg; = 0.000328378* diesel/0.32512675; lognormal variance with pedigree 0.0223, pedigree (3,2,2,5,3)
  Air emissions are adjusted based on diesel amount used by this service activity.
- Zinc II [air, non-urban air or from high stacks]: 8.80599e-6 kg; = 0.000000325127* diesel/0.32512675; lognormal variance with pedigree 0.6623, pedigree (3,2,2,5,3)
  Air emissions are adjusted based on diesel amount used by this service activity.
- Cadmium II [soil, agricultural]: 1.80302e-6 kg; lognormal variance with pedigree 0.0462, pedigree (3,4,2,5,1)
  Proxy, based on 'Agricultural Field Work Processes'from Nemecek and Kagi, 2007.
- Lead II [soil, agricultural]: 7.8131e-6 kg; lognormal variance with pedigree 0.0462, pedigree (3,4,2,5,1)
  Proxy, based on 'Agricultural Field Work Processes'from Nemecek and Kagi, 2007.
- Zinc II [soil, agricultural]: 4.80806e-5 kg; lognormal variance with pedigree 0.0462, pedigree (3,4,2,5,1)
  Proxy, based on 'Agricultural Field Work Processes'from Nemecek and Kagi, 2007.

## Sampling procedure
The main source of data for agricultural inputs and operations modelling procedures is detailed in Cavalett et al., 2016. Emissions from the agricultural process are estimated according to Nemecek and Kagi, 2007.

## Extrapolations
Extrapolated from Brazilian data, uncertainty adjusted accordingly.
