# treatment of sewage sludge, 75% water, WWT, condensate from light oil boiler, sanitary landfill

Dataset: EcoSpold 2, unit process
Geography: GLO
Time period: 1994-01-01 to 2022-12-31
Technology level: current
Classification: ISIC rev.4 ecoinvent: 3821:Treatment and disposal of non-hazardous waste
Scenario: Business-as-Usual
System model: Allocation at the point of substitution
Generated by: Nikolia Stoikou
Database: ecoinvent
isCopyrightProtected: true

## General comment
The process represents the treatment of a waste (sewage sludge) that is exclusively generated from another waste treatment. Sewage sludge is generated in the wastewater treatment of 'condensate from light oil boiler'. Recommended use of this dataset: to be used within the specific chain of treatments for 'condensate from light oil boiler'. Share of biogenic carbon in the sludge: 0%. Landfill gas capture and utilisation generates 0.03321 kWh of electricity and 0.0599 MJ of useful heat. 0.002598 kg waste mass remains in the landfill even after the long term period.

## Included activities start
The activity starts with the waste being available at the gate of the treatment facility. Collection and transportation of the waste to the treatment plant is not included.

## Included activities end
The activity ends with the waste being treated and waste-specific emissions from the landfill are released to the environment (air due to landfil gas and water due to landfil leachate).

## Geography
Landfill site with mean annual temperature (MAT) of 16.743579766537 degC, mean annual precipitation (MAP) of 1250.84108527132 mm/year, and net infiltration of 790.252035689178 mm/year.The leachate percolating through the landfill has an average residence time of 6.33 years.
References: UN data, 2020. Precipitation, Environment Statistics Database, United Nations Statistics Division Available at: http://data.un.org/Data.aspx?q=precipitation&d=ENV&f=variableID%3a6;
World Bank, 2022. Surface area (sq.km), World Bank Group Available at: https://data.worldbank.org/indicator/AG.SRF.TOTL.K2;
Doka G.,2021. A model for composition-specific life cycle inventories of regionalised wastewater fates, Zurich, Switzerland. http://www.doka.ch/publications.htm

## Technology
Sanitary (controlled) landfill for municipal solid waste. Ultimate average landfill height is 20 meters. Operation phase duration is 30 years. The total raw landfill gas mass produced in the landfill from this waste is 0.108 kg. The total CH4 mass in the raw landfill gas is 0.03759 kg. Percentage of landfill gas directly emitted is 47w%. Percentage of landfill gas captured and flared is 18.02w%. Percentage of landfill gas captured and utilised is 34.98%. Conversion efficiencies are 27.8e% for electricity and 13.5e% for useful heat. Leachate generated during the first 100 years is collected and treated region-specifically before emission. Based on average waste composition and climate data the end of carbonate phase is estimated to be reached 2'863 years after waste deposition.

## Reference product
- heat, district or industrial, other than natural gas: 1 MJ; By-product classification allocatable product; CPC 17300: Steam and hot water; lognormal variance with pedigree 0.12852, pedigree (1,1,1,1,1)
  Net production of heat from landfill gas utilisation.
  Uncertainty: Uncertainty calculated depending on waste input and uncertainty of transfer coefficients in landfill to landfill gas, uncertainty in gas capture and utilisation.
  production volume 51245.6 MJ
    Calculated from the production volume of the reference product in proportion to the respective output amounts.
  property corresponding fuel use, propane, furnace >100kW 0 MJ; name fuel_use
    Lower heating value of the fuel input related to the heat/electricity output, taken directly from ecoinvent v3.0 dataset "heat production, natural gas, at industrial furnace >100kW, GLO 2000".
  property price 0.0106 EUR2005
    Average European district heat price from Ecoheatcool and Euroheat 2005-2006, Ecoheat Work package 1: The European heat market. Final report. 10.6 EUR/GJ i s the price of district heat. http://www.solarthermalworld.org/files/Ecoheatcool%20WP1%20Web.pdf?download
  properties: carbon allocation 0 kg, carbon content 0, carbon content, fossil 0, carbon content, non-fossil 0, dry mass 1 kg, heating value, net 1 MJ, water content 0, water in wet mass 0 kg, wet mass 1 kg

## Inputs from technosphere
- chimney: 8.10176e-7 m
- condensate from light oil boiler: -9.83599e-6 m3
- electricity, low voltage: 8.85784e-5, 0.000175542, 0.00168626, 3.00804e-5, 0.000602666, 5.47025e-6, 4.40892e-5 kWh (7 suppliers, which the file names only by identifier); sum of these 0.00263269 kWh
- hazardous waste, for incineration: -4.08033e-6, -6.94964e-8 kg (2 suppliers, which the file names only by identifier); sum of these -4.14983e-6 kg
- light fuel oil: 0.0196531, 0.000392194, 0.00195073, 0.000187565, 0.000139392, 0.000129448, 0.000966551 kg (7 suppliers, which the file names only by identifier); sum of these 0.023419 kg
- oil boiler, 100kW: 3.30676e-8 unit
- oil boiler, 10kW: 3.30676e-7 unit
- oil storage, 3000l: 3.08632e-7 unit

## Emissions to nature
- Acetaldehyde [air, urban air close to ground]: 2.04991e-8 kg
- Acetone [air, urban air close to ground]: 4.99979e-8 kg
- Acrolein [air, urban air close to ground]: 1.14995e-8 kg
- Benzaldehyde [air, urban air close to ground]: 5.99975e-9 kg
- Benzene [air, urban air close to ground]: 1.99992e-8 kg
- Butane [air, urban air close to ground]: 1.49994e-7 kg
- Carbon dioxide, fossil [air, urban air close to ground]: 0.0739969 kg
- Carbon monoxide, fossil [air, urban air close to ground]: 8.24965e-6 kg
- Copper ion [air, urban air close to ground]: 3.99983e-10 kg
- Dinitrogen monoxide [air, urban air close to ground]: 6.99971e-7 kg
- Dioxins, measured as 2,3,7,8-tetrachlorodibenzo-p-dioxin [air, urban air close to ground]: 5.69976e-17 kg
- Ethane [air, urban air close to ground]: 1.99992e-8 kg
- Ethylene [air, urban air close to ground]: 4.99979e-8 kg
- Ethyne [air, urban air close to ground]: 9.99958e-9 kg
- Formaldehyde [air, urban air close to ground]: 5.99975e-9 kg
- Hydrocarbons, aliphatic, alkanes, unspecified [air, urban air close to ground]: 2.49989e-7 kg
- Hydrocarbons, aliphatic, unsaturated [air, urban air close to ground]: 1.99992e-8 kg
- Hydrocarbons, aromatic [air, urban air close to ground]: 1.99992e-8 kg
- Hydrogen fluoride [air, urban air close to ground]: 4.49981e-9 kg
- Mercury II [air, urban air close to ground]: 4.99979e-10 kg
- Methane, fossil [air, urban air close to ground]: 1.99992e-7 kg
- Nitrogen oxides [air, urban air close to ground]: 2.74988e-5 kg
- PAH, polycyclic aromatic hydrocarbons [air, urban air close to ground]: 4.59981e-10 kg
- Particulate Matter, < 2.5 um [air, urban air close to ground]: 4.99979e-7 kg
- Pentane [air, urban air close to ground]: 9.99958e-8 kg
- Propanal [air, urban air close to ground]: 5.99975e-9 kg
- Propane [air, urban air close to ground]: 2.99987e-8 kg
- Propene [air, urban air close to ground]: 1.99992e-8 kg
- Sulfur dioxide [air, urban air close to ground]: 4.56671e-5 kg
- Toluene [air, urban air close to ground]: 9.99958e-9 kg
- Zinc II [air, urban air close to ground]: 4.99979e-10 kg
