# treatment of wastewater from concrete production, wastewater treatment

Dataset: EcoSpold 2, unit process
Geography: RoW
Time period: 2010-01-01 to 2022-12-31
Technology level: current
Classification: ISIC rev.4 ecoinvent: 3700:Sewerage
Scenario: Business-as-Usual
System model: Allocation at the point of substitution
Generated by: Nikolia Stoikou
Database: ecoinvent
isCopyrightProtected: true

## General comment
This dataset represents the treatment of a wastewater, generated from an ordinary transforming activity. Purification in wastewater treatment of 'wastewater from concrete production'. Recommended use of this dataset: to be used for wastewaters, generated from ordinary transforming activities, of equal or similar composition. The wastewater has a content of TOC: 0.01216 kg/m3, COD: 0.04741 kg/m3 and BOD: 0.02293 kg/m3. TOC is equal to C present in the wastewater, COD is calculated as TOC/0.2565 and BOD is calculated as COD/0.53034. Detailed elemental composition can be found in the properties of the wastewater treated. Share of biogenic carbon in the sludge: 0%.

## Included activities start
The activity starts with the wastewater being available at the gate of the treatment facility. Collection and transportation of the wastewater to the treatment plant is not included.

## Included activities end
The activity ends with the wastewater being treated and waste-specific emissions released to the environment. Expenditures from treatment of wastewater in waste treatment plant are included as well as relevant infrastructure of the plant. Emissions from any sludge digestion, biogas generation and utilization (heeding specific wastewater composition) are also included. Waste-specific direct emissions of untreated wastewater and required territory-specific infrastructure for sewers are not contained within this dataset but instead in the regional market datasets for this wastewater.

## Geography
The site has mean annual temperature (MAT) of 16.743579766537 degC, mean annual precipitation (MAP) of 1250.84108527132 mm/year, mean annual actual evaporation (EAT) of 460.58904958214 mm/year. In the WWT plant, 0% of its water input are lost due to evaporation from pools, 0.000599% of water is *gained* from organic mass degradation, and 0.00119% is removed off site via sludge disposal. (References: UN data, 2020. Precipitation, Environment Statistics Database, United Nations Statistics Division Available at: http://data.un.org/Data.aspx?q=precipitation&d=ENV&f=variableID%3a6; World Bank, 2022. Surface area (sq.km), World Bank Group Available at: https://data.worldbank.org/indicator/AG.SRF.TOTL.K2; Doka G.,2021. A model for composition-specific life cycle inventories of regionalised wastewater fates, Zurich, Switzerland. http://www.doka.ch/publications.htm)

## Technology
This is an inventory for the disposal of a selected wastewater in Global. The reference unit is 1 m3 wastewater input. This activity represents the treatment of a specific wastewater in a WWT plant (while direct emissions and sewering are heeded in the upstream market dataset for this wastewater). The size of the treatment plant infrastructure is for a supranational region average territory situation. The assumed size of the WWTP treats 82.2 Mio m3 per year. The mixture of WWTP with one, two, or three stages is 8.2%-41.2%-50.6%. The actual, waste-specific oxygen requirement in the biological stages is 0.008148866 kg O. The digestion process produces 1.370261 litres of biogas with an energy content of 0.029324225MJ. 60.5% of the biogas is utilized for energy. The remainder is flared. The gross electric efficiency is 26.564%. The gross thermal efficiency is 47.853%. After digestion, the remaining total sludge mass (dry matter) is 0.02081kg DM.

## Reference product
- iron scrap, sorted, pressed: 1 kg; By-product classification Recyclable; CPC 39310: Slag, dross, scalings and other waste from the manufacture of iron or steel; lognormal variance with pedigree 0.3611, pedigree (1,1,1,1,1)
  scrap output from used infrastructure for wastewater treatment plant.
  Uncertainty: Uncertainty calculated from wastewater technosphere fate uncertainty and treatment infrastructure uncertainty.
  production volume 33867.5 kg
    Calculated in proportion to wastewater reference product.
  property price 0.175 EUR2005
    Temporary price data. Calculated as 90% of purchasers price based on: 2005 import and export prices (total trades (USD) divided by total weight (kg) in biggest economies of the world: EU27, USA, Brasil, China, India, Japan and Russia) from UN Commodity Trade Statistics Database (http://data.un.org/Explorer.aspxDatabase [Accessed 2011.06.20]). Commodity: Waste or scrap, of cast iron
  properties: carbon allocation 0 kg, carbon content 0, carbon content, fossil 0, carbon content, non-fossil 0, dry mass 1 kg, water content 0, water in wet mass 0 kg, wet mass 1 kg

## Inputs from technosphere
- acetic acid, without water, in 98% solution state: 5.59201e-5 kg
- alkylbenzene sulfonate, linear, petrochemical: 0.000145778 kg
- aluminium, cast alloy: 7.3546e-6 kg
- anhydrite: 8.15317e-5 kg
- cement, ART: 7.65439e-5 kg
- cement, CEM II/A: 1.01698e-6, 0.000977198, 6.78982e-5, 4.81943e-7 kg (4 suppliers, which the file names only by identifier); sum of these 0.0010466 kg
- cement, CEM II/B: 0.000547197, 0.000143208, 0.0077388 kg (3 suppliers, which the file names only by identifier); sum of these 0.00842921 kg
- cement, CEM II/B-V: 0.000283041 kg
- cement, CEM III/A: 0.0077192, 3.2257e-6, 0.111082, 0.000124823 kg (4 suppliers, which the file names only by identifier); sum of these 0.118929 kg
- cement, CP II-E: 0.00214487 kg
- cement, CP II-F: 0.00111032 kg
- cement, CP III: 0.0168945 kg
- cement, Portland: 0.0094399, 0.00013067, 0.000196792, 0.000218205, 0.00667145, 0.00365726, 0.00129037, 0.0967315, 1.44125e-5 kg (9 suppliers, which the file names only by identifier); sum of these 0.118351 kg
- cement, type ICo: 0.000361084 kg
- cement, type IP: 0.000378279 kg
- cement, type general use: 0.000263563 kg
- chemical, organic: 0.00119156 kg
- clay pit infrastructure: 1.27729e-12 unit
- concrete mixing factory: 4.08907e-10 unit
- concrete, 25-30MPa: 2.62503e-6 m3
- concrete, 25MPa: 1.91015e-7, 8.27095e-8, 3.18005e-5, 3.86261e-8, 1.30773e-6, 1.28688e-6 m3 (6 suppliers, which the file names only by identifier); sum of these 3.47074e-5 m3
- diesel, burned in building machine: 0.00935161 MJ
- electricity, medium voltage: 3.57373e-5, 4.82544e-5, 6.9399e-5, 1.44865e-5, 0.00122087, 0.000848523, 0.00458241, 4.58272e-5, 2.33968e-11, 1.71608e-5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 kWh (78 suppliers, which the file names only by identifier); sum of these 0.0279119 kWh
- ethylene oxide: 0.000153979, 6.97011e-5 kg (2 suppliers, which the file names only by identifier); sum of these 0.00022368 kg
- expanded clay: 0.00249003 kg
- fatty alcohol: 9.66194e-7 kg
- gravel, crushed: 0.000122228, 0.106109, 0.361261, 0.00185131, 0.10301 kg (5 suppliers, which the file names only by identifier); sum of these 0.572353 kg
- gravel, round: 0.439224, 0.000106513 kg (2 suppliers, which the file names only by identifier); sum of these 0.439331 kg
- gypsum, mineral: 6.0575e-5 kg
- heat, central or small-scale, other than natural gas: 8.2034e-5, 0.00108463 MJ (2 suppliers, which the file names only by identifier); sum of these 0.00116667 MJ
- heat, district or industrial, natural gas: 0.00111024, 0.000319014, 0.00427323, 2.23825e-5 MJ (4 suppliers, which the file names only by identifier); sum of these 0.00572487 MJ
- heat, district or industrial, other than natural gas: 0.00152303, 0.00452689, 0.0201371 MJ (3 suppliers, which the file names only by identifier); sum of these 0.026187 MJ
- lubricating oil: 8.36259e-5, 1.57236e-5 kg (2 suppliers, which the file names only by identifier); sum of these 9.93495e-5 kg
- municipal solid waste: -7.53528e-10, -4.34304e-8, -1.6247e-10, -5.32925e-7, -1.8987e-10 kg (5 suppliers, which the file names only by identifier); sum of these -5.77461e-7 kg
- packing, clay product: 0.00764844 kg
- quicklime, milled, packed: 0.000435011 kg
- reinforcing steel: 0.00301676 kg
- sand: 0.054258, 0.00907812, 0.000119719, 0.680346 kg (4 suppliers, which the file names only by identifier); sum of these 0.743802 kg
- scrap steel: -2.77782e-9, -8.46659e-6, -2.1925e-6 kg (3 suppliers, which the file names only by identifier); sum of these -1.06619e-5 kg
- steel, low-alloyed, hot rolled: 2.14166e-5 kg
- synthetic rubber: 1.85024e-5 kg
- tap water: 0.000404922, 0.076449, 0.0280105, 0.00101343, 0.15482, 0.00149314, 0.122679, 0.0019393, 0.00137492, 0.0157928 kg (10 suppliers, which the file names only by identifier); sum of these 0.403977 kg
- waste concrete: -1.06297e-5, -0.0478343, -0.00300645 kg (3 suppliers, which the file names only by identifier); sum of these -0.0508514 kg
- waste mineral oil: -1.28287e-7, -1.70438e-5, -5.18205e-6 kg (3 suppliers, which the file names only by identifier); sum of these -2.23541e-5 kg
- waste rubber, unspecified: -2.68469e-7, -6.3952e-6, -8.80241e-6 kg (3 suppliers, which the file names only by identifier); sum of these -1.54661e-5 kg
- wastewater from concrete production: -3.63528e-7, -8.77253e-5 m3 (2 suppliers, which the file names only by identifier); sum of these -8.80888e-5 m3
- wastewater, unpolluted: -4.73041e-7, -0.000105253 m3 (2 suppliers, which the file names only by identifier); sum of these -0.000105726 m3

## Inputs from nature
- Water, unspecified natural origin [natural resource, in water]: 7.04593e-5 m3

## Emissions to nature
- Carbon dioxide, fossil [air, non-urban air or from high stacks]: 3.31475e-5 kg
- Water [air, unspecified]: 3.72665e-5 m3
- Chlorides, unspecified [water, unspecified]: 1.39631e-12 kg
- Copper ion [water, unspecified]: 7.00415e-12 kg
- Iron ion [water, unspecified]: 7.00415e-12 kg
- Oils, unspecified [water, unspecified]: 1.04836e-10 kg
- Suspended solids, unspecified [water, unspecified]: 2.09673e-10 kg
- Water [water, unspecified]: 8.59036e-5 m3
