# natural gas pressure reduction, from high to low pressure

Dataset: EcoSpold 2, unit process
Geography: RoW
Time period: 2010-01-01 to 2022-12-31
Technology level: current
Classification: ISIC rev.4 ecoinvent: 3520:Manufacture of gas; distribution of gaseous fuels through mains
Scenario: Business-as-Usual
System model: Allocation at the point of substitution
Generated by: Carl Vadenbo
Database: ecoinvent
isCopyrightProtected: false

## General comment
This activity represents the reduction of pressure, from high to low pressure level, for the distribution of natural gas [m3] to end-users.

## Included activities start
Only the input of natural gas at high pressure (from regional distribution) considered in this activity.

## Included activities end
Pressure reduction from high to low pressure, for supply to local distribution network. Energy requirements, losses and emissions, and infrastructure for the distribution at the different pressure levels are considered in the corresponding market activities.

## Geography
Global

## Technology
Within this dataset, natural gas gas at high pressure (1-5 bar overpressure) is converted to low pressure (0.1 bar overpressure) for local distribution, e.g., for residential use.

## Reference product
- natural gas, low pressure: 1 m3; By-product classification allocatable product; CPC 69120: Gas distribution through mains (on own account); CAS 14493-06-2
  production volume 1.81666e12 m3
    Bussa et al. (2021) use the assumption from Faist-Emmenegger et al. (2015) that 23% of natural gas is consumed at high-pressure level, and the rest (77%) delivered at low pressure. Total natural gas consumption in 2019 based on BP (2020).
  property heating value, gross 40 MJ
    At standard conditions, and assuming amount equal to that of high pressure; based on Meili et al. (2022) section 5.2
  property heating value, net 36 MJ
    (same comment as for natural gas, low pressure)
  property price 0.205 EUR2005
    Calculated value based on data from United Nations Commodity Trade Statistics Database (comtrade.un.org). UN comtrade category: 271121 Natural gas in gaseous state. Year 2005. Using exchange rate of 1EURO = 1.209 USD. Average of price of import into 4 main markets (EU, US, JP and CN).
  properties: carbon allocation 0.544635 kg, carbon content 0.741, carbon content, fossil 0.741, carbon content, non-fossil 0, dry mass 0.735 kg, water content 0, water in wet mass 0 kg, wet mass 0.735 kg

## Inputs from technosphere
- natural gas, high pressure: 0.012639, 0.00533495, 0.0305547, 0.00906748, 0.512954, 0.052428, 0.00572294, 0.000168876, 0.0203213, 0.0213398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 m3 (20 suppliers, which the file names only by identifier); sum of these 1 m3
  No uncertainty considered since this activity is only intended to link natural gas at low pressure to the corresponding high pressure supply.
  properties: carbon content, fossil 0.741, dry mass 0.735 kg, heating value, gross 40 MJ, heating value, net 36 MJ, wet mass 0.735 kg
  note on heating value, gross: At standard conditions; based on Meili et al. (2022) section 5.2

## Review by Emilia Moreno Ruiz 2015-09-17
broken formula fixed
