# treatment of waste paint, municipal incineration

Dataset: EcoSpold 2, unit process
Geography: RoW
Time period: 2006-01-01 to 2022-12-31
Technology level: current
Classification: ISIC rev.4 ecoinvent: 3821:Treatment and disposal of non-hazardous waste
Synonyms: municipal waste incineration; Siedlungsabfallverbrennung; Kehrichtverbrennung
Scenario: Business-as-Usual
System model: Allocation at the point of substitution
Share of production covered: 1.8 %
Generated by: Gabor Doka
Published in: Doka G. 2013
Database: ecoinvent
isCopyrightProtected: true

## General comment
This dataset represents the activity of waste disposal of waste paint in a municipal solid waste incinerator (MSWI) // Recommended use of this dataset: For disposal of small amounts of dried paint, which go to disposal as part of a larger, burnable item or in small quantities. Larger amounts of waste paint, unused paint or removed (stripped) paint are to be disposed in hazardous waste incinerator. // // Waste composition (wet, in ppm): upper heating value 10.86 MJ/kg; lower heating value 10.14 MJ/kg; H2O n.a.; O 290300; H 36288; C 651510; S n.a.; N n.a.; P n.a.; B n.a.; Cl 1600; Br n.a.; F n.a.; I n.a.; Ag n.a.; As 2.5; Ba n.a.; Cd 5.0622; Co 388.23; Cr 1040.7; Cu 59; Hg 0.6; Mn n.a.; Mo 38.619; Ni 15; Pb 15246; Sb n.a.; Se n.a.; Sn 256.78; V n.a.; Zn 3251.5; Be n.a.; Sc n.a.; Sr n.a.; Ti n.a.; Tl n.a.; W n.a.; Si n.a.; Fe n.a.; Ca n.a.; Al n.a.; K n.a.; Mg n.a.; Na n.a.; // Share of carbon in waste that is biogenic 0%. // Share of metals in waste not oxidised and bulk-recyclable (exclude very small or thin parts) Iron: 0%; Alu: 0%; Copper: 0%. // One kg of this waste produces 0.02213 kg of slag and 0.01612 kg of residues, which are landfilled. Additional solidification with 0.006447 kg of cement. // Net energy production: 1.02MJ/kg electric energy and 2.11MJ/kg thermal energy. // Recovery of metal scrap to recycling: 0g iron scrap, 0g aluminium scrap, 0g copper scrap.

## Included activities start
waste incineration from waste reception gate and delivery into waste bunker at incinerator plant site (without transports to the incinerator)

## Included activities end
Waste-specific short-term emissions to water from leachate. Long-term emissions from landfill to ground water.

## Geography
Specific to the technology mix encountered in Switzerland in 2010. Well applicable to modern incineration practices in Europe, North America or Japan.

## Technology
average Swiss MSWI plants in 2010 (grate incinerators) with electrostatic precipitator for fly ash (ESP), wet flue gas scrubber and 25% SNCR , 42.77% SCR-high dust , 32.68% SCR-low dust -DeNOx facilities and 0% without Denox (weighted according to mass of burnt waste, representing Swiss average). Efficiency of iron scrap separation from slag : 58%. Efficiency of non-ferrous scrap separation from slag : 31%. Gross electric efficiency technology mix 15.84% and Gross thermal efficiency technology mix 28.51%

## Time period
Waste composition as given in literature reference, theoretical data or other source. Transfer coefficients for modern MSWI.

## Reference product
- heat, for reuse in municipal waste incineration only: 1 MJ; name E_th_prod_MSWI; By-product classification allocatable product; CPC 17300: Steam and hot water; lognormal variance with pedigree 0.025417, pedigree (1,1,1,1,1)
  Net electricity generated from this waste and used in internal MSWI plant energy redistribution.
  Uncertainty: uncertainty is calculated from uncertainties in waste composition and uncertainties in energy efficiency and the uncertainty in internal energy demand
  production volume 7.12786e9 MJ
    calculated in proportion to reference product waste input to incinerator
  property exergy 0.1842 MJ; name E_th_prod_MSWI_exergy
    This exergy property is based on the exergy content of the product.
  property price 0.0106 EUR2005
    Average European district heat price from Ecoheatcool and Euroheat 2005-2006, Ecoheat Work package 1: The European heat market. Final report. 10.6 EUR/GJ i s the price of district heat. http://www.solarthermalworld.org/files/Ecoheatcool%20WP1%20Web.pdf?download
  property true value relation 0.1842; name E_th_prod_MSWI_true_value_relation
    property to calculate "true value" from
  properties: carbon allocation 0 kg, carbon content 0

## Inputs from technosphere
- N-methyl-2-pyrrolidone: 1.84567e-10 kg
- acrylic varnish, with water, in 53% solution state: 4.10104e-8 kg
- activated carbon, granular: 1.32157e-9 kg
- air compressor, screw-type compressor, 300kW: 4.18081e-12 unit
- air compressor, screw-type compressor, 4kW: 2.0904e-11 unit
- alkyd paint, white, without solvent, in 60% solution state: 0.000140427, 0.000666626 kg (2 suppliers, which the file names only by identifier); sum of these 0.000807053 kg
- alkyd paint, white, without water, in 60% solution state: 7.631e-9, 5.11032e-8 kg (2 suppliers, which the file names only by identifier); sum of these 5.87342e-8 kg
- aluminium casting facility: 6.47568e-18 unit
- aluminium oxide, non-metallurgical: 2.64957e-8, 1.56502e-7 kg (2 suppliers, which the file names only by identifier); sum of these 1.82998e-7 kg
- aluminium scrap, new: -2.27634e-8, -2.27634e-8 kg (2 suppliers, which the file names only by identifier); sum of these -4.55267e-8 kg
- aluminium scrap, post-consumer: -1.80281e-7 kg
- aluminium, cast alloy: 5.52096e-7 kg
- aluminium, primary, ingot: 5.3191e-10, 3.93571e-8, 7.14631e-9, 8.71489e-11 kg (4 suppliers, which the file names only by identifier); sum of these 4.71224e-8 kg
- aluminium, wrought alloy: 3.82937e-9 kg
- ammonia, anhydrous, liquid: 1.78876e-10, 1.87481e-11, 3.95874e-10, 6.89027e-10, 9.21469e-11, 8.3811e-11, 1.98272e-9, 5.92301e-11 kg (8 suppliers, which the file names only by identifier); sum of these 3.50044e-9 kg
- blower and heat exchange unit, central, 600-1200 m3/h: 1.85344e-13 unit
- borax, anhydrous, powder: 3.28015e-8 kg
- building, hall, steel construction: 5.84834e-8 m2
- butadiene: 1.26524e-10 kg
- carbon dioxide, liquid: 5.72023e-10 kg
- cast iron: 5.80099e-7 kg
- cement, unspecified: 2.87152e-6 kg
- ceramic tile: 1.07824e-7 kg
- chemical factory, organics: 1.98788e-15 unit
- chemical, organic: 9.91886e-9 kg
- chlorine, liquid: 2.34036e-9, 2.92596e-10 kg (2 suppliers, which the file names only by identifier); sum of these 2.63295e-9 kg
- chromium: 1.237e-12 kg
- clay: 1.06132e-12, 6.9143e-9 kg (2 suppliers, which the file names only by identifier); sum of these 6.91536e-9 kg
- clay brick: 2.71125e-6 kg
- coating powder: 3.79787e-8 kg
- compressed air, 1000 kPa gauge: 3.46564e-8 m3
- concrete, normal strength: 3.47692e-9, 1.77594e-12, 4.50023e-13, 6.73069e-9, 2.04471e-12, 1.78573e-8, 1.65534e-11, 7.01996e-10, 3.94306e-11, 3.23185e-12 m3 (10 suppliers, which the file names only by identifier); sum of these 2.88304e-8 m3
- containerboard, fluting medium: 3.44325e-5 kg
- containerboard, linerboard: 4.31029e-5 kg
- containerboard, unspecified: 8.15528e-5 kg
- copper scrap, sorted, pressed: -2.47338e-9 kg
- copper, cathode: 1.33516e-6 kg
- cyclic N-compound: 2.61395e-9 kg
- dichloromethane: 5.09779e-11 kg
- diesel, burned in building machine: 7.2811e-5 MJ
- diesel, burned in diesel-electric generating set, 10MW: 3.28023e-8 MJ
- diesel, low-sulfur: 5.42823e-10, 1.30823e-8, 2.4584e-10, 3.63444e-11, 1.09562e-9, 5.47991e-10 kg (6 suppliers, which the file names only by identifier); sum of these 1.55509e-8 kg
- diethylene glycol: 7.12646e-10 kg
- door, inner, wood: 1.25604e-10 m2
- door, outer, wood-aluminium: 2.63393e-10 m2
- electricity, low voltage: 3.61301e-9, 8.39392e-9 kWh (2 suppliers, which the file names only by identifier); sum of these 1.20069e-8 kWh
- electricity, medium voltage: 0.000181944, 3.76329e-8, 2.48895e-6, 2.06391e-6, 1.61876e-6, 7.4121e-8, 3.78196e-7, 5.8787e-7, 2.28364e-5, 4.95046e-7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 kWh (11 suppliers, which the file names only by identifier); sum of these 0.000213774 kWh
- electronics scrap from control units: -3.31051e-9 kg
- electronics, for control units: 3.31051e-9 kg
- elevator, hydraulic: 1.06573e-12 unit
- energy and auxilliary inputs, metal working factory: 1.29641e-13, 2.89097e-14 kg (2 suppliers, which the file names only by identifier); sum of these 1.58551e-13 kg
- epoxy resin, liquid: 8.07418e-8, 1.70086e-8 kg (2 suppliers, which the file names only by identifier); sum of these 9.77504e-8 kg
- ethoxylated alcohol (AE7): 3.55753e-10, 1.6888e-9 kg (2 suppliers, which the file names only by identifier); sum of these 2.04456e-9 kg
- ethylene vinyl acetate copolymer: 4.39111e-8 kg
- excavation, hydraulic digger: 3.63356e-9 m3
- flat glass, coated: 5.476e-8, 2.01008e-7 kg (2 suppliers, which the file names only by identifier); sum of these 2.55768e-7 kg
- flat glass, uncoated: 6.12585e-6, 2.97478e-5 kg (2 suppliers, which the file names only by identifier); sum of these 3.58737e-5 kg
- fly ash and scrubber sludge: -1.43914e-10, -1.21584e-8, -4.79594e-9 kg (3 suppliers, which the file names only by identifier); sum of these -1.70982e-8 kg
- gas boiler: 4.18081e-12 unit
- generator, 200kW electrical: 2.0904e-12 unit
- glass fibre reinforced plastic, polyamide, injection moulded: 2.64885e-7 kg
- glass tube, borosilicate: 5.53991e-10 kg
- glass wool mat: 6.57755e-6 kg
- glycerine: 8.35624e-10 kg
- graphite: 5.03962e-12 kg
- gypsum plasterboard: 1.52811e-7 kg
- hard coal: 4.404e-9, 5.84359e-9, 2.64969e-9, 1.87525e-8, 2.70394e-9, 1.14988e-9, 6.28752e-10 kg (7 suppliers, which the file names only by identifier); sum of these 3.61323e-8 kg
- hazardous waste, for incineration: -5.01613e-8, -2.41224e-8, -6.30545e-10 kg (3 suppliers, which the file names only by identifier); sum of these -7.49143e-8 kg
- hazardous waste, for underground deposit: -1.26467e-8, -8.14609e-10 kg (2 suppliers, which the file names only by identifier); sum of these -1.34614e-8 kg
- heat, district or industrial, natural gas: 1.97565e-5, 1.78623e-6, 6.28473e-10 MJ (3 suppliers, which the file names only by identifier); sum of these 2.15434e-5 MJ
- heat, district or industrial, other than natural gas: 1.78214e-10 MJ
- heavy fuel oil: 2.16246e-8, 1.81962e-10, 9.25058e-10, 1.19948e-9, 2.3343e-10, 3.12481e-10 kg (6 suppliers, which the file names only by identifier); sum of these 2.4477e-8 kg
- inert waste: -1.30623e-7 kg
- inert waste, for final disposal: -5.07657e-9, -7.7978e-7 kg (2 suppliers, which the file names only by identifier); sum of these -7.84857e-7 kg
- isopropanol: 4.26822e-8, 8.99116e-9 kg (2 suppliers, which the file names only by identifier); sum of these 5.16733e-8 kg
- kaolin: 1.6228e-7 kg
- light fuel oil: 2.2411e-7, 2.22447e-8, 2.13886e-9, 1.58953e-9, 1.47613e-9, 1.10218e-8 kg (6 suppliers, which the file names only by identifier); sum of these 2.62581e-7 kg
- lime, hydrated, packed: 7.38607e-8 kg
- liquefied petroleum gas: 6.36469e-9, 4.44715e-10, 2.26063e-8, 6.62745e-10, 1.99803e-9, 9.46097e-8 kg (6 suppliers, which the file names only by identifier); sum of these 1.26686e-7 kg
- lubricating oil: 3.97768e-8, 8.16063e-9 kg (2 suppliers, which the file names only by identifier); sum of these 4.79374e-8 kg
- maize starch: 2.25219e-6 kg
- manganese: 1.54854e-11 kg
- metal working factory: 1.58551e-13 unit
- metal working, average for chromium steel product manufacturing: 7.7313e-8 kg
- methyl ethyl ketone: 2.97127e-10, 8.20138e-11 kg (2 suppliers, which the file names only by identifier); sum of these 3.7914e-10 kg
- monoethanolamine: 1.20803e-9 kg
- municipal solid waste: -1.34092e-10, -2.63367e-7, -9.38321e-11 kg (3 suppliers, which the file names only by identifier); sum of these -2.63595e-7 kg
- natural gas, high pressure: 4.40178e-8, 1.858e-8, 1.06413e-7, 3.15793e-8, 1.78647e-6, 1.82591e-7, 1.99313e-8, 5.88144e-10, 7.07731e-8, 7.43201e-8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 m3 (22 suppliers, which the file names only by identifier); sum of these 3.70887e-6 m3
- natural stone plate, cut: 2.76963e-10 kg
- nickel, class 1: 1.237e-12 kg
- nitric acid, without water, in 50% solution state: 2.38664e-10, 3.10484e-9, 3.54617e-10, 8.81868e-10, 1.14684e-9, 4.22545e-10, 1.45328e-9, 3.83133e-10, 3.53305e-10 kg (9 suppliers, which the file names only by identifier); sum of these 8.33909e-9 kg
- nitrogen, liquid: 3.51149e-7, 9.58573e-8 kg (2 suppliers, which the file names only by identifier); sum of these 4.47006e-7 kg
- packaging box factory: 2.05744e-13 unit
- packaging film, low density polyethylene: 8.44561e-8 kg
- paper, woodcontaining, supercalendered: 4.37909e-8 kg
- perlite: 2.95128e-9 kg
- petrol, unleaded: 1.13557e-13, 1.30756e-11, 4.24815e-13, 4.70835e-13, 1.13927e-13, 2.33918e-14 kg (6 suppliers, which the file names only by identifier); sum of these 1.42221e-11 kg
- phenolic resin: 2.71902e-8 kg
- plywood: 2.02191e-9 m3
- polyethylene terephthalate, granulate, amorphous: 9.59408e-9 kg
- polyethylene, high density, granulate: 1.48362e-8 kg
- polyol: 3.57909e-6 kg
- polyvinylchloride, bulk polymerised: 7.53838e-7 kg
- polyvinylchloride, emulsion polymerised: 3.37488e-9 kg
- polyvinylchloride, suspension polymerised: 2.30616e-8 kg
- potato starch: 1.56646e-7 kg
- printing ink, offset, without solvent, in 47.5% solution state: 2.25176e-7 kg
- propane, burned in building machine: 7.81311e-8 MJ
- propylene glycol, liquid: 1.01478e-9, 5.0116e-10 kg (2 suppliers, which the file names only by identifier); sum of these 1.51594e-9 kg
- reinforcing steel: 0.00261683 kg
- road: 4.62874e-8 m*year
- sand: 1.11772e-5, 5.80268e-8, 1.33827e-7, 0.000727366 kg (4 suppliers, which the file names only by identifier); sum of these 0.000738735 kg
- sanitary ceramics: 2.25222e-8 kg
- sawnwood, beam, softwood, dried (u=10%), planed: 8.7343e-13 m3
- scrap aluminium: -1.70691e-7, -8.00843e-9, -3.59405e-7 kg (3 suppliers, which the file names only by identifier); sum of these -5.38105e-7 kg
- scrap copper: -3.76306e-8, -8.02052e-7, -1.68879e-6 kg (3 suppliers, which the file names only by identifier); sum of these -2.52848e-6 kg
- scrap steel: -7.96192e-8, -0.000195182, -6.28425e-5 kg (3 suppliers, which the file names only by identifier); sum of these -0.000258105 kg
- sheet rolling, aluminium: 7.22716e-9 kg
- sheet rolling, chromium steel: 3.70501e-8 kg
- sheet rolling, steel: 9.14224e-7 kg
- silica sand: 2.10737e-7 kg
- silicon carbide: 5.31714e-9 kg
- silicon, metallurgical grade: 3.63819e-8 kg
- sludge from pulp and paper production: -1.17591e-7 kg
- soap: 5.74462e-8 kg
- sodium hydroxide, without water, in 50% solution state: 1.10498e-7 kg
- sodium nitrite: 4.06273e-11, 2.00105e-11 kg (2 suppliers, which the file names only by identifier); sum of these 6.06378e-11 kg
- spent solvent mixture: -8.7916e-8, -8.03562e-10, -3.42986e-8 kg (3 suppliers, which the file names only by identifier); sum of these -1.23018e-7 kg
- steel, chromium steel 18/8: 9.55335e-8 kg
- steel, chromium steel 18/8, hot rolled: 9.74882e-9 kg
- steel, low-alloyed: 0.000258057 kg
- steel, low-alloyed, hot rolled: 9.28849e-10 kg
- styrene: 1.26524e-10 kg
- styrene-acrylonitrile copolymer: 2.93986e-8 kg
- sulfuric acid: 6.31735e-10, 8.26441e-11 kg (2 suppliers, which the file names only by identifier); sum of these 7.14379e-10 kg
- synthetic rubber: 3.54635e-9 kg
- tap water: 3.97956e-8, 7.23282e-6, 2.86834e-7, 4.74262e-5, 5.35218e-7, 8.27689e-5, 1.9825e-5, 6.10513e-6 kg (8 suppliers, which the file names only by identifier); sum of these 0.00016422 kg
- tetraethyl orthosilicate: 1.34329e-7 kg
- titanium dioxide: 1.46298e-9, 2.92597e-9 kg (2 suppliers, which the file names only by identifier); sum of these 4.38895e-9 kg
- toluene diisocyanate: 1.50721e-6 kg
- triphenyl phosphate: 3.91301e-9 kg
- urea: 5.1109e-10, 6.46385e-11, 4.36435e-10 kg (3 suppliers, which the file names only by identifier); sum of these 1.01216e-9 kg
- used door, inner, wood: -1.25604e-10 m2
- used door, outer, wood-aluminium: -2.63393e-10 m2
- used window frame, wood: -4.08079e-10 m2
- used window frame, wood-metal: -9.29731e-11 m2
- vinyl acetate: 1.20181e-7 kg
- waste aluminium: -1.59573e-9 kg
- waste cement, hydrated: -2.87152e-6 kg
- waste concrete: -1.60623e-10, -2.75793e-5, -4.543e-8 kg (3 suppliers, which the file names only by identifier); sum of these -2.76249e-5 kg
- waste concrete, not reinforced: -7.56223e-8, -8.01275e-10, -1.07926e-6 kg (3 suppliers, which the file names only by identifier); sum of these -1.15569e-6 kg
- waste emulsion paint, separated: -8.4716e-11 kg
- waste foundry sand: -0.000662791 kg
- waste glass: -1.1103e-7, -2.67186e-7, -2.98618e-6, -2.49281e-8, -5.50656e-6, -4.14254e-8, -2.73198e-5, -6.06156e-9 kg (8 suppliers, which the file names only by identifier); sum of these -3.62631e-5 kg
- waste gypsum plasterboard: -1.52811e-7 kg
- waste mineral oil: -9.16193e-10, -1.00083e-7, -3.70089e-8 kg (3 suppliers, which the file names only by identifier); sum of these -1.38008e-7 kg
- waste mineral wool: -4.64876e-6, -2.17527e-8, -1.90633e-6 kg (3 suppliers, which the file names only by identifier); sum of these -6.57684e-6 kg
- waste paint: -0.000759793, -2.24408e-7, -7.47821e-5 kg (3 suppliers, which the file names only by identifier); sum of these -0.000834799 kg
- waste paint on metal: -3.01713e-8, -2.56104e-10 kg (2 suppliers, which the file names only by identifier); sum of these -3.04274e-8 kg
- waste paint on wall: -3.01841e-8 kg
- waste paper, unsorted: -7.25184e-9 kg
- waste plastic, mixture: -2.04799e-8, -1.03489e-10, -2.28331e-10, -1.27482e-8, -1.4337e-7, -1.36838e-9, -5.36703e-10, -5.65192e-10 kg (8 suppliers, which the file names only by identifier); sum of these -1.794e-7 kg
- waste polyethylene: -1.64777e-9, -4.27881e-11, -1.15353e-8, -1.10098e-10, -8.32651e-12, -4.54743e-11, -1.83711e-11, -1.4281e-9 kg (8 suppliers, which the file names only by identifier); sum of these -1.48362e-8 kg
- waste polyethylene/polypropylene product: -6.95093e-8, -2.74183e-8, -8.22754e-10 kg (3 suppliers, which the file names only by identifier); sum of these -9.77504e-8 kg
- waste polyurethane: -2.04959e-11, -1.83835e-9, -9.28954e-12, -1.28695e-8, -1.22831e-10, -5.07337e-11, -4.81764e-11 kg (7 suppliers, which the file names only by identifier); sum of these -1.49593e-8 kg
- waste polyvinylchloride: -4.17492e-10, -2.16515e-9, -1.95515e-8, -2.28009e-9, -5.52031e-9, -1.00354e-7, -7.16048e-8, -5.78381e-7 kg (8 suppliers, which the file names only by identifier); sum of these -7.80275e-7 kg
- waste reinforced concrete: -3.00105e-6, -3.17984e-8, -4.28303e-5 kg (3 suppliers, which the file names only by identifier); sum of these -4.58631e-5 kg
- waste reinforcement steel: -4.18109e-7, -2.90316e-10 kg (2 suppliers, which the file names only by identifier); sum of these -4.18399e-7 kg
- waste rubber, unspecified: -7.29073e-11, -1.73672e-9, -1.73672e-9 kg (3 suppliers, which the file names only by identifier); sum of these -3.54635e-9 kg
- waste wood, untreated: -1.65678e-6, -7.62333e-9 kg (2 suppliers, which the file names only by identifier); sum of these -1.66441e-6 kg
- waste x-ray film: -9.59408e-9 kg
- wastewater from maize starch production: -4.0038e-12 m3
- wastewater from vegetable oil refinery: -5.31095e-8 m3
- wastewater, average: -3.59281e-10, -1.0037e-14, -8.61612e-8, -1.4296e-8 m3 (4 suppliers, which the file names only by identifier); sum of these -1.00817e-7 m3
- water, deionised: 1.16117e-11, 3.22569e-9, 1.13926e-7 kg (3 suppliers, which the file names only by identifier); sum of these 1.17163e-7 kg
- wax, lost-wax casting: 3.51344e-7 kg
- window frame, aluminium, U=1.6 W/m2K: 3.20436e-9 m2
- window frame, wood, U=1.5 W/m2K: 4.08079e-10 m2
- window frame, wood-metal, U=1.6 W/m2K: 9.29731e-11 m2
- wire drawing, copper: 2.58514e-7 kg
- wood chips, dry, measured as dry mass: 5.43774e-8 kg
- zinc: 1.19579e-6 kg
- zircon: 4.5334e-8 kg

## Inputs from nature
- Occupation, industrial area [natural resource, land]: 3.63356e-8 m2*year
- Occupation, urban, continuously built [natural resource, land]: 3.55465e-7 m2*year
- Oxygen [natural resource, in air]: 6.63743e-6 kg
- Transformation, from heterogeneous, agricultural [natural resource, land]: 4.01445e-9 m2
- Transformation, from pasture, man made [natural resource, land]: 1.81678e-9 m2
- Transformation, from urban, green area [natural resource, land]: 7.25082e-10 m2
- Transformation, to industrial area [natural resource, land]: 1.81678e-9 m2
- Transformation, to urban, continuously built [natural resource, land]: 4.73953e-9 m2
- Water, cooling, unspecified natural origin [natural resource, in water]: 6.07961e-14 m3
- Water, river [natural resource, in water]: 6.20535e-9 m3
- Water, unspecified natural origin [natural resource, in water]: 3.37589e-8 m3
- Water, well, in ground [natural resource, in water]: 7.46255e-9 m3

## Emissions to nature
- Acetaldehyde [air, unspecified]: 3.38418e-13 kg
- Acetic acid [air, unspecified]: 2.2232e-11 kg
- Acetone [air, unspecified]: 1.49068e-13 kg
- Ammonia [air, unspecified]: 3.07013e-12 kg
- Arsenic ion [air, unspecified]: 3.91742e-14 kg
- Benzene [air, unspecified]: 5.90507e-11 kg
- Benzene, ethyl- [air, unspecified]: 2.21859e-14 kg
- Benzene, hexachloro- [air, unspecified]: 5.32464e-21 kg
- Benzo(a)pyrene [air, unspecified]: 2.18247e-15 kg
- Bromine [air, unspecified]: 5.39327e-14 kg
- Butane [air, unspecified]: 1.04707e-10 kg
- Cadmium II [air, unspecified]: 2.11112e-15 kg
- Calcium [air, unspecified]: 5.70631e-12 kg
- Carbon dioxide, fossil [air, unspecified]: 9.17459e-6 kg
- Carbon dioxide, fossil [air, urban air close to ground]: 1.50915e-7 kg
- Carbon dioxide, non-fossil [air, unspecified]: 7.913e-8 kg
- Carbon monoxide, fossil [air, unspecified]: 4.26367e-10 kg
- Carbon monoxide, non-fossil [air, unspecified]: 2.2186e-10 kg
- Chlorine [air, unspecified]: 1.33116e-13 kg
- Chromium III [air, unspecified]: 3.05394e-14 kg
- Chromium VI [air, unspecified]: 2.88295e-15 kg
- Cobalt II [air, unspecified]: 3.59819e-14 kg
- Copper ion [air, unspecified]: 8.35933e-12 kg
- Dinitrogen monoxide [air, unspecified]: 2.50515e-11 kg
- Dioxins, measured as 2,3,7,8-tetrachlorodibenzo-p-dioxin [air, unspecified]: 5.32126e-20 kg
- Ethanol [air, unspecified]: 2.98137e-13 kg
- Fluorine [air, unspecified]: 3.69765e-14 kg
- Formaldehyde [air, unspecified]: 2.57327e-11 kg
- Hydrocarbons, aliphatic, alkanes, unspecified [air, unspecified]: 7.47207e-12 kg
- Hydrocarbons, aliphatic, unsaturated [air, unspecified]: 2.82662e-12 kg
- Hydrocarbons, aromatic [air, unspecified]: 5.0523e-13 kg
- Hydrochloric acid [air, unspecified]: 4.33918e-11 kg
- Hydrogen fluoride [air, unspecified]: 1.42528e-12 kg
- Iron ion [air, unspecified]: 5.27253e-12 kg
- Lead II [air, unspecified]: 2.39034e-13 kg
- Magnesium [air, unspecified]: 4.0885e-12 kg
- Manganese II [air, unspecified]: 1.48008e-13 kg
- Mercury II [air, unspecified]: 1.34983e-14 kg
- Methane, fossil [air, non-urban air or from high stacks]: 1.85127e-10 kg
- Methane, fossil [air, unspecified]: 1.28289e-10 kg
- Methane, non-fossil [air, unspecified]: 2.21859e-12 kg
- Methanol [air, unspecified]: 5.06833e-13 kg
- Molybdenum VI [air, unspecified]: 1.27307e-14 kg
- NMVOC, non-methane volatile organic compounds [air, non-urban air or from high stacks]: 0.000625093 kg
- NMVOC, non-methane volatile organic compounds [air, unspecified]: 1.56815e-8 kg
- Nickel II [air, unspecified]: 5.10556e-13 kg
- Nitrogen [air, unspecified]: 4.45073e-7 kg
- Nitrogen oxides [air, unspecified]: 5.12027e-9 kg
- PAH, polycyclic aromatic hydrocarbons [air, unspecified]: 1.45806e-12 kg
- Particulate Matter, < 2.5 um [air, non-urban air or from high stacks]: 4.05095e-8 kg
- Particulate Matter, < 2.5 um [air, unspecified]: 8.57429e-11 kg
- Particulate Matter, > 10 um [air, non-urban air or from high stacks]: 1.5386e-6 kg
- Particulate Matter, > 10 um [air, unspecified]: 2.01691e-11 kg
- Particulate Matter, > 2.5 um and < 10um [air, non-urban air or from high stacks]: 4.91444e-7 kg
- Particulate Matter, > 2.5 um and < 10um [air, unspecified]: 3.26443e-9 kg
- Pentane [air, unspecified]: 1.75579e-10 kg
- Phenol, pentachloro- [air, unspecified]: 5.99022e-18 kg
- Potassium I [air, unspecified]: 1.85758e-11 kg
- Propane [air, unspecified]: 3.01246e-11 kg
- Propanol [air, urban air close to ground]: 3.26156e-8 kg
- Propionic acid [air, unspecified]: 2.88476e-12 kg
- Selenium IV [air, unspecified]: 2.14861e-14 kg
- Sodium [air, unspecified]: 2.34412e-12 kg
- Sulfur dioxide [air, unspecified]: 1.08098e-9 kg
- Sulfur oxides [air, unspecified]: 1.00845e-9 kg
- Toluene [air, unspecified]: 2.95563e-11 kg
- Vanadium V [air, unspecified]: 1.03201e-12 kg
- Water [air, non-urban air or from high stacks]: 1.59837e-9 m3
- Water [air, unspecified]: 3.47685e-8 m3
- Water [air, urban air close to ground]: 8.5803e-9 m3
- Zinc II [air, unspecified]: 8.59012e-12 kg
- m-Xylene [air, unspecified]: 8.87439e-14 kg
- Hydrocarbons, unspecified [soil, unspecified]: 4.44194e-5 kg
- BOD5, Biological Oxygen Demand [water, surface water]: 3.35368e-10 kg
- BOD5, Biological Oxygen Demand [water, unspecified]: 2.01691e-10 kg
- COD, Chemical Oxygen Demand [water, unspecified]: 2.34914e-9 kg
- DOC, Dissolved Organic Carbon [water, unspecified]: 8.70052e-10 kg
- Hydrocarbons, unspecified [water, unspecified]: 4.44194e-5 kg
- Nitrogen [water, unspecified]: 2.48752e-10 kg
- Phosphorus [water, unspecified]: 2.48752e-10 kg
- Solids, inorganic [water, unspecified]: 7.38735e-5 kg
- Suspended solids, unspecified [water, surface water]: 1.86562e-10 kg
- TOC, Total Organic Carbon [water, unspecified]: 8.70052e-10 kg
- Water [water, surface water]: 9.88039e-10 m3
- Water [water, unspecified]: 1.3715e-8 m3
