# operation, computer, desktop, with cathode ray tube display, home use

Dataset: EcoSpold 2, unit process
Geography: CA-QC
Time period: 2012-01-01 to 2022-12-31
Technology level: old
Classification: ISIC rev.4 ecoinvent: 8219:Photocopying, document preparation and other specialized office support act
Classification: EcoSpold01Categories: electronics/services
Synonyms: CRT; PC
Tags: Recontextualization
Scenario: Business-as-Usual
System model: Allocation at the point of substitution
Generated by: Pascal Lesage
Published in: Hischier R. 2007
Database: ecoinvent
isCopyrightProtected: true

## General comment
The computer desktop home use is calculated according to the share between active (3.14 hrs/day), standby (2.62 hrs/day) and off (18.24 hrs/day) modes taken from survey information. This dataset describes the application of a CRT monitor.
Child dataset exchanges identical to GLO dataset. Created to enable linking to regional markets (e.g. for electricity). Data quality indicators adjusted accordingly.

## Included activities end
Describes the use of a desktop computer with a CRT monitor. Calculated per 1 hour of computer use at home.

## Geography
The data is based on information in Japan. For the computer electricity use data information from various international manufacturers and computer types has been processed.
Child dataset exchanges identical to GLO dataset. Created to enable linking to regional markets (e.g. for electricity). Data quality indicators adjusted accordingly.

## Technology
No technology involved, except for the production of the desktop computer, which is described in another dataset.

## Parameters
- Quebec gross domestic product 2011: 3.11e11 USD(2011); name quebecGDP2011; lognormal variance with pedigree 0.0006, pedigree (1,1,1,1,1)
  Quebec Gross domestic product for 2011, expressed in 2011 USD. Source: Institut de la statistique du Québec. Converted from CAD to USD using a yearly average exchange rate of 0.989 CAD/USD (Source: bank of Canada).
- fraction of computers (desktop) sold with cathode ray tube display: 0.36 % (obsolete); name fraction_computer_desktop_CRT_display; lognormal variance with pedigree 0.0566, pedigree (4,5,5,1,1)
  Literature value (ecoinvent report v2 no.18 IV).
- fraction of computers desktop sold for home use: 0.1 dimensionless; name fraction_computer_desktop_home_use; lognormal variance with pedigree 0.2106, pedigree (5,5,5,5,5)
  Estimation
- number of computers (desktop) sold in 4 years: 4.79462e8 dimensionless; name no_computer_desktop_sold_4years; lognormal variance with pedigree 0.0166, pedigree (4,5,1,1,1)
  Calculated value. Number of computers (desktop) sold in 4 years (from 2002 - 2005 included). Using annual growth of 5.92%. Literature value (http://www.etforecasts.com/products/ES_pcww1203.htm); worldwide sales of desktop computers in millions in 2005 was 130.4 mill. units. Calculated values (using annual growth of 5.92%); 123.1 mil. (2004), 116.2 mil. (2003) and 109.7 mil. (2002).
- number of days in a year computer desktop home use: 365 dimensionless; name no_days_computer_desktop_home_use; lognormal variance with pedigree 0.1786, pedigree (4,5,5,5,5)
  Estimation (based on assumptions made in ecoinvent report no.18 IV ecoinvent database v2). Number of days in the year when computer (desktop) is used in a home.
- number of hours in a day when computer (desktop) is in active mode - home use: 3.14 dimensionless; name no_hours_computer_desktop_AM_home_use; lognormal variance with pedigree 0.0127, pedigree (4,4,3,3,1)
  Literature value (Williams, 2005).
- number of hours in a day when computer (desktop) is in off mode - home use: 18.24 dimensionless; name no_hours_computer_desktop_OM_home_use; lognormal variance with pedigree 0.0127, pedigree (4,4,3,3,1)
  Literature value (Williams, 2005).
- number of hours in a day when computer (desktop) is in standby mode - home use: 2.62 dimensionless; name no_hours_computer_desktop_SM_home_use; lognormal variance with pedigree 0.0127, pedigree (4,4,3,3,1)
  Literature value (Williams, 2005).
- world gross domestic product 2011: 7e13 USD(2011); name worldGDP2011; lognormal variance with pedigree 0.0006, pedigree (1,1,1,1,1)
  World Gross domestic product for 2011, expressed in 2011 USD. Source: World Bank.

## Reference product
- operation, computer, desktop, home use: 1 hour; = op_CRT_active_input+ op_CRT_off_input+ op_CRT_standby_input; By-product classification allocatable product; CPC 85: Support services
  production volume 6.71774e8 hour
    Gross approximation of Quebec production volume using relative value of Quebec GDP to world GDP
  property price 0.0202103 EUR2005
    Calculated based on inputs: The price of the product has been calculated as a sum of the values of the material and energy inputs for this product. This value is therefore a rough estimation. It may underestimate the real price since there are additional expenses when producing any product. These expences can include for example labour costs, treatment of waste materials and profit for the producer. Please consider carefully whether this level of data quality is acceptable for your application.
  properties: carbon allocation 0 kg, carbon content 0

## Inputs from technosphere
- operation, computer, desktop, with cathode ray tube display, active mode: 0.130833 hour; name op_CRT_active_input; = (1/24)*3.14; source Williams E. D. 2005; lognormal variance with pedigree 0.0372, pedigree (2,5,4,4,1)
  Literature value (Williams, 2005) state that computer, while used at home, is used 3.14 hours a day in the active mode, 18.24 hours in the off mode and approximatelly 2.74 hours a day in standby mode. In order to have a sum of 24 hours a day the standby use is adjusted to (24-18.24-3.14=) 2.62 hours a day.
- operation, computer, desktop, with cathode ray tube display, off mode: 0.76 hour; name op_CRT_off_input; = (1/24)*18.24; source Williams E. D. 2005; lognormal variance with pedigree 0.0372, pedigree (2,5,4,4,1)
  (same comment as for operation, computer, desktop, with cathode ray tube display, active mo)
- operation, computer, desktop, with cathode ray tube display, standby mode: 0.109167 hour; name op_CRT_standby_input; = 1- op_CRT_active_input- op_CRT_off_input; source Williams E. D. 2005; lognormal variance with pedigree 0.0372, pedigree (2,5,4,4,1)
  (same comment as for operation, computer, desktop, with cathode ray tube display, active mo)

## Sampling procedure
Producers, literature, survey and own assumptions

## Extrapolations
see Geography and Technology. Child dataset exchanges identical to GLO dataset. Created to enable linking to regional markets (e.g. for electricity). Data quality indicators adjusted accordingly.
