# treatment of waste polypropylene, open burning

Dataset: EcoSpold 2, unit process
Geography: GLO
Time period: 2006-01-01 to 2022-12-31
Technology level: current
Classification: ISIC rev.4 ecoinvent: 3821:Treatment and disposal of non-hazardous waste
Synonyms: open, uncontrolled burning
Scenario: Business-as-Usual
System model: Allocation at the point of substitution
Share of production covered: 1 %
Generated by: Avraam Symeonidis
Database: ecoinvent
isCopyrightProtected: true

## General comment
This dataset represents the activity of waste disposal of waste polypropylene in uncontrolled, open burning. Recommended use of this dataset: For PP, which goes to disposal as part of unmanaged communal waste mixture.Waste composition (wet, in ppm): upper heating value 36.16 MJ/kg; lower heating value 32.78 MJ/kg; H2O 159000; O 32454; H 103430; C 694120; S 360.46; N 1095.3; P n.a.; B n.a.; Cl 1234.1; Br 8.0972; F 12.146; I n.a.; Ag n.a.; As 1.5385; Ba 202.43; Cd 28.663; Co 1.417; Cr 10.526; Cu 34.93; Hg 0.040486; Mn 25.371; Mo n.a.; Ni 0.80972; Pb 19.079; Sb 8.5021; Se 1.7004; Sn 3.2205; V 1862.4; Zn 288.78; Be 0.40486; Sc n.a.; Sr 71.661; Ti 809.72; Tl 0.32389; W n.a.; Si n.a.; Fe 1295.6; Ca 2186.3; Al 161.94; K n.a.; Mg 80.972; Na 1186.6; . Share of carbon in waste that is biogenic 0%. // Recycling rates for metallic iron = 0% for metallic aluminium = 0% for metallic copper = 0% . A mass of 0.024kg residues are left on ground.

## Included activities start
open burning starting from waste placement on burning site (without transports to the site)

## Included activities end
Waste-specific emissions to air and soil from open burning.

## Geography
Generic open burning without any geographical distinction.

## Technology
This is an inventory for open burning of solid waste. Informal or uncontrolled burning. No flue gas treatment. Suitable for informal recycling (e.g. burning of e-waste). Based on Municipal waste incineration without any pollution control. Residues (minus any actually recycled metals) are left on site. Assumption of share of thermal NOx to total NOx in average waste burning process is 30%. Contribution from thermal NOx is 810mg per kg waste. Recycling rates for metallic iron = 0% for metallic aluminium = 0% for metallic copper = 0% .

## Time period
generic open burning without any temporal distinction

## Reference product
- waste polypropylene: -1 kg; By-product classification Waste; CPC 39270: Waste, parings and scrap of plastics; CAS 9003-07-0
  main reference product of this activity (supply of disposal service).
  production volume 1 kg
    The amount of the annual production volume is a placeholder value. The contribution of this technology to the different local markets can be found in the markets themselves.
  property heating value, net 32.78 MJ
    Value assumed for all polypropylene products. Source: Phyllis2, database for (treated) biomass, algae, feedstocks for biogas production and biochar, https://phyllis.nl/Biomass/View/1186, ECN.TNO
  property price 0 EUR2005
    Waste products are assigned a price of zero as they are assumed to require further treatment.
  properties: aluminium content 0.00019256, antimony content 1.011e-5, arsenic content 1.8293e-6, barium content 0.0002407, beryllium content 4.8141e-7, bromine content 9.6281e-6, cadmium content 3.4082e-5, calcium content 0.0025996, carbon allocation 0.694119 kg, carbon content 0.82535, carbon content, fossil 0.82535, chlorine content 0.0014674, chromium content 1.2517e-5, cobalt content 1.6849e-6, copper content 4.1533e-5, dry mass 0.841 kg, fluorine content 1.4442e-5, heating value, gross 36.159 MJ, hydrogen content 0.12298, iron content 0.0015405, lead content 2.2687e-5, magnesium content 9.6281e-5, manganese content 3.0168e-5, mercury content 4.8141e-8, nickel content 9.6281e-7, nitrogen content 0.0013024, oxygen content 0.03859, selenium content 2.0219e-6, sodium content 0.001411, strontium content 8.5209e-5, sulfur content 0.00042861, thallium content 3.8512e-7, tin content 3.8294e-6, titanium content 0.00096281, vanadium content 0.0022145, water content 0.18906, water in wet mass 0.159 kg, wet mass 1 kg, zinc content 0.00034338

## Inputs from nature
- Oxygen [natural resource, in air]: 2.6275 kg; lognormal variance with pedigree 0.022985, pedigree (1,1,4,1,1)
  oxygen from ambient air needed to combust and oxidise this waste. Net demand, i.e. without air O2 leaving the process uncombusted.
  Uncertainty: uncertainty is calculated from uncertainties in waste composition and transfer coefficients to flue gas and soild residues

## Emissions to nature
- Acetaldehyde [air, urban air close to ground]: 0.0004284 kg; lognormal variance with pedigree 0.0491, pedigree (1,1,4,1,1)
  Process-specific (constant) emissions to air from open burning.
  Uncertainty: uncertainty generic estimate
- Aluminium III [air, urban air close to ground]: 1.3349e-7 kg; lognormal variance with pedigree 1.0132, pedigree (1,1,4,1,1)
  Emissions to air from open burning.
  Uncertainty: Uncertainty calculated depending on waste input and uncertainty of transfer coefficents in incineration model.
- Antimony ion [air, urban air close to ground]: 2.0432e-11 kg; lognormal variance with pedigree 1.5829, pedigree (1,1,4,1,1)
  (same comment as for Aluminium III)
- Arsenic ion [air, urban air close to ground]: 1.3112e-8 kg; lognormal variance with pedigree 1.575, pedigree (1,1,4,1,1)
  (same comment as for Aluminium III)
- Barium II [air, urban air close to ground]: 8.3434e-6 kg; lognormal variance with pedigree 0.902, pedigree (1,1,4,1,1)
  (same comment as for Aluminium III)
- Benzene [air, urban air close to ground]: 0.00097975 kg; lognormal variance with pedigree 0.0491, pedigree (1,1,4,1,1)
  (same comment as for Acetaldehyde)
- Benzene, ethyl- [air, urban air close to ground]: 0.00032746 kg; lognormal variance with pedigree 0.0491, pedigree (1,1,4,1,1)
  (same comment as for Acetaldehyde)
- Beryllium II [air, urban air close to ground]: 7.6521e-10 kg; lognormal variance with pedigree 1.7807, pedigree (1,1,4,1,1)
  (same comment as for Aluminium III)
- Bromine [air, urban air close to ground]: 2.5966e-6 kg; lognormal variance with pedigree 1.3074, pedigree (1,1,4,1,1)
  (same comment as for Aluminium III)
- Cadmium II [air, urban air close to ground]: 1.6217e-7 kg; lognormal variance with pedigree 1.1982, pedigree (1,1,4,1,1)
  (same comment as for Aluminium III)
- Calcium [air, urban air close to ground]: 5.1617e-5 kg; lognormal variance with pedigree 0.59908, pedigree (1,1,4,1,1)
  (same comment as for Aluminium III)
- Carbon dioxide, fossil [air, urban air close to ground]: 2.4555 kg; lognormal variance with pedigree 0.0123368, pedigree (1,1,4,1,1)
  Emissions to air from open burning.
  Uncertainty: Uncertainty calculated depending on waste input, uncertainty of transfer coefficents in incineration model,and uncertainty in CO and CH4 emissions.
- Carbon monoxide, fossil [air, urban air close to ground]: 0.0386 kg; lognormal variance with pedigree 0.65557, pedigree (1,1,4,1,1)
  (same comment as for Acetaldehyde)
- Chromium III [air, urban air close to ground]: 1.5697e-8 kg; lognormal variance with pedigree 1.3616, pedigree (1,1,4,1,1)
  (same comment as for Aluminium III)
- Cobalt II [air, urban air close to ground]: 5.7152e-8 kg; lognormal variance with pedigree 1.5583, pedigree (1,1,4,1,1)
  (same comment as for Aluminium III)
- Copper ion [air, urban air close to ground]: 3.8391e-8 kg; lognormal variance with pedigree 1.2101, pedigree (1,1,4,1,1)
  (same comment as for Aluminium III)
- Dinitrogen monoxide [air, urban air close to ground]: 0.00011625 kg; lognormal variance with pedigree 0.0491, pedigree (1,1,4,1,1)
  (same comment as for Aluminium III)
- Dioxins, measured as 2,3,7,8-tetrachlorodibenzo-p-dioxin [air, urban air close to ground]: 1.7187e-11 kg; lognormal variance with pedigree 1.1187, pedigree (1,1,4,1,1)
  Process-specific (constant) emissions to air from open burning.
  Uncertainty: Uncertainty calculated from uncetainty in Chlorine content in waste and estimation formula
- Formaldehyde [air, urban air close to ground]: 0.00044365 kg; lognormal variance with pedigree 0.0491, pedigree (1,1,4,1,1)
  (same comment as for Acetaldehyde)
- Hydrochloric acid [air, urban air close to ground]: 0.00084649 kg; lognormal variance with pedigree 0.63871, pedigree (1,1,4,1,1)
  (same comment as for Aluminium III)
- Hydrogen fluoride [air, urban air close to ground]: 1.363e-6 kg; lognormal variance with pedigree 1.2635, pedigree (1,1,4,1,1)
  (same comment as for Aluminium III)
- Iron ion [air, urban air close to ground]: 2.3474e-6 kg; lognormal variance with pedigree 0.71964, pedigree (1,1,4,1,1)
  (same comment as for Aluminium III)
- Lead II [air, urban air close to ground]: 1.6033e-7 kg; lognormal variance with pedigree 1.2441, pedigree (1,1,4,1,1)
  (same comment as for Aluminium III)
- Magnesium [air, urban air close to ground]: 2.4258e-7 kg; lognormal variance with pedigree 1.0741, pedigree (1,1,4,1,1)
  (same comment as for Aluminium III)
- Manganese II [air, urban air close to ground]: 2.1596e-7 kg; lognormal variance with pedigree 1.206, pedigree (1,1,4,1,1)
  (same comment as for Aluminium III)
- Mercury II [air, urban air close to ground]: 2.4537e-8 kg; lognormal variance with pedigree 1.9305, pedigree (1,1,4,1,1)
  (same comment as for Aluminium III)
- Methane, fossil [air, urban air close to ground]: 0.0059 kg; lognormal variance with pedigree 0.0491, pedigree (1,1,4,1,1)
  (same comment as for Acetaldehyde)
- Nickel II [air, urban air close to ground]: 1.1552e-9 kg; lognormal variance with pedigree 1.6983, pedigree (1,1,4,1,1)
  (same comment as for Aluminium III)
- Nitrogen oxides [air, urban air close to ground]: 0.0021419 kg; lognormal variance with pedigree 0.37553, pedigree (1,1,4,1,1)
  (same comment as for Aluminium III)
- PAH, polycyclic aromatic hydrocarbons [air, urban air close to ground]: 0.0003443 kg; lognormal variance with pedigree 0.30974, pedigree (1,1,4,1,1)
  (same comment as for Acetaldehyde)
- Particulate Matter, < 2.5 um [air, urban air close to ground]: 0.00083203 kg; lognormal variance with pedigree 0.42186, pedigree (1,1,4,1,1)
  (same comment as for Aluminium III)
- Particulate Matter, > 10 um [air, urban air close to ground]: 0.00032001 kg; lognormal variance with pedigree 0.42186, pedigree (1,1,4,1,1)
  (same comment as for Aluminium III)
- Particulate Matter, > 2.5 um and < 10um [air, urban air close to ground]: 0.00044801 kg; lognormal variance with pedigree 0.42186, pedigree (1,1,4,1,1)
  (same comment as for Aluminium III)
- Phenol [air, urban air close to ground]: 1.4799e-5 kg; lognormal variance with pedigree 0.0491, pedigree (1,1,4,1,1)
  (same comment as for Acetaldehyde)
- Polychlorinated biphenyls [air, urban air close to ground]: 1.1189e-7 kg; lognormal variance with pedigree 0.0491, pedigree (1,1,4,1,1)
  (same comment as for Acetaldehyde)
- Selenium IV [air, urban air close to ground]: 1.4737e-7 kg; lognormal variance with pedigree 1.5242, pedigree (1,1,4,1,1)
  (same comment as for Aluminium III)
- Sodium [air, urban air close to ground]: 2.9228e-5 kg; lognormal variance with pedigree 0.67724, pedigree (1,1,4,1,1)
  (same comment as for Aluminium III)
- Strontium [air, urban air close to ground]: 7.1661e-8 kg; lognormal variance with pedigree 1.1168, pedigree (1,1,4,1,1)
  (same comment as for Aluminium III)
- Styrene [air, urban air close to ground]: 0.0005275 kg; lognormal variance with pedigree 0.0491, pedigree (1,1,4,1,1)
  (same comment as for Acetaldehyde)
- Sulfur dioxide [air, urban air close to ground]: 0.00015525 kg; lognormal variance with pedigree 0.80989, pedigree (1,1,4,1,1)
  (same comment as for Aluminium III)
- Thallium I [air, urban air close to ground]: 6.4778e-10 kg; lognormal variance with pedigree 1.8079, pedigree (1,1,4,1,1)
  (same comment as for Aluminium III)
- Tin ion [air, urban air close to ground]: 6.3109e-12 kg; lognormal variance with pedigree 1.7176, pedigree (1,1,4,1,1)
  (same comment as for Aluminium III)
- Titanium ion [air, urban air close to ground]: 8.5858e-6 kg; lognormal variance with pedigree 0.74236, pedigree (1,1,4,1,1)
  (same comment as for Aluminium III)
- Toluene [air, urban air close to ground]: 0.000372 kg; lognormal variance with pedigree 0.0491, pedigree (1,1,4,1,1)
  (same comment as for Acetaldehyde)
- Vanadium V [air, urban air close to ground]: 0.00014379 kg; lognormal variance with pedigree 0.60216, pedigree (1,1,4,1,1)
  (same comment as for Aluminium III)
- Water [air, urban air close to ground]: 0.00098644 m3; lognormal variance with pedigree 0.095149, pedigree (1,1,4,1,1)
  water vapour from waste humidity, hydrogen oxidation.
  Uncertainty: Uncertainty calculated from uncertainty in waste composition and the uncertainty of fraction to air.
- Zinc II [air, urban air close to ground]: 2.1485e-6 kg; lognormal variance with pedigree 0.88532, pedigree (1,1,4,1,1)
  (same comment as for Aluminium III)
- Aluminium III [soil, industrial]: 0.00016181 kg; lognormal variance with pedigree 0.90589, pedigree (1,1,4,1,1)
  Emissions from open burning to residues left on ground.
  Uncertainty: Uncertainty calculated depending on waste input and uncertainty of transfer coefficents in incineration model.
- Antimony ion [soil, industrial]: 8.5021e-6 kg; lognormal variance with pedigree 1.2973, pedigree (1,1,4,1,1)
  (same comment as for Aluminium III)
- Arsenic ion [soil, industrial]: 1.5254e-6 kg; lognormal variance with pedigree 1.5215, pedigree (1,1,4,1,1)
  (same comment as for Aluminium III)
- Barium II [soil, industrial]: 0.00019409 kg; lognormal variance with pedigree 0.87624, pedigree (1,1,4,1,1)
  (same comment as for Aluminium III)
- Beryllium II [soil, industrial]: 4.041e-7 kg; lognormal variance with pedigree 1.694, pedigree (1,1,4,1,1)
  (same comment as for Aluminium III)
- Bromine [soil, industrial]: 5.5006e-6 kg; lognormal variance with pedigree 1.3042, pedigree (1,1,4,1,1)
  (same comment as for Aluminium III)
- Cadmium II [soil, industrial]: 2.8501e-5 kg; lognormal variance with pedigree 1.1363, pedigree (1,1,4,1,1)
  (same comment as for Aluminium III)
- Calcium [soil, industrial]: 0.0021346 kg; lognormal variance with pedigree 0.56445, pedigree (1,1,4,1,1)
  (same comment as for Aluminium III)
- Carbon [soil, industrial]: 0.0034811 kg; lognormal variance with pedigree 0.07659, pedigree (1,1,4,1,1)
  (same comment as for Aluminium III)
- Chloride [soil, industrial]: 0.00041081 kg; lognormal variance with pedigree 0.64163, pedigree (1,1,4,1,1)
  (same comment as for Aluminium III)
- Chromium III [soil, industrial]: 1.0511e-5 kg; lognormal variance with pedigree 1.2691, pedigree (1,1,4,1,1)
  (same comment as for Aluminium III)
- Cobalt II [soil, industrial]: 1.3599e-6 kg; lognormal variance with pedigree 1.5322, pedigree (1,1,4,1,1)
  (same comment as for Aluminium III)
- Copper ion [soil, industrial]: 3.4891e-5 kg; lognormal variance with pedigree 1.11, pedigree (1,1,4,1,1)
  (same comment as for Aluminium III)
- Dioxins, measured as 2,3,7,8-tetrachlorodibenzo-p-dioxin [soil, industrial]: 4.7741e-12 kg; lognormal variance with pedigree 1.5991, pedigree (1,1,4,1,1)
  (same comment as for Dioxins, measured as 2,3,7,8-tetrachlorodibenzo-p-dioxin)
- Fluoride [soil, industrial]: 1.0851e-5 kg; lognormal variance with pedigree 1.2502, pedigree (1,1,4,1,1)
  (same comment as for Aluminium III)
- Iron ion [soil, industrial]: 0.0012932 kg; lognormal variance with pedigree 0.63192, pedigree (1,1,4,1,1)
  (same comment as for Aluminium III)
- Lead II [soil, industrial]: 1.8919e-5 kg; lognormal variance with pedigree 1.1904, pedigree (1,1,4,1,1)
  (same comment as for Aluminium III)
- Magnesium [soil, industrial]: 8.073e-5 kg; lognormal variance with pedigree 0.99812, pedigree (1,1,4,1,1)
  (same comment as for Aluminium III)
- Manganese II [soil, industrial]: 2.5155e-5 kg; lognormal variance with pedigree 1.1525, pedigree (1,1,4,1,1)
  (same comment as for Aluminium III)
- Mercury II [soil, industrial]: 1.5949e-8 kg; lognormal variance with pedigree 1.9323, pedigree (1,1,4,1,1)
  (same comment as for Aluminium III)
- Nickel II [soil, industrial]: 8.0857e-7 kg; lognormal variance with pedigree 1.6047, pedigree (1,1,4,1,1)
  (same comment as for Aluminium III)
- Nitrogen [soil, industrial]: 1.0967e-5 kg; lognormal variance with pedigree 0.70403, pedigree (1,1,4,1,1)
  (same comment as for Aluminium III)
- Selenium IV [soil, industrial]: 1.553e-6 kg; lognormal variance with pedigree 1.5085, pedigree (1,1,4,1,1)
  (same comment as for Aluminium III)
- Sodium [soil, industrial]: 0.0011574 kg; lognormal variance with pedigree 0.64332, pedigree (1,1,4,1,1)
  (same comment as for Aluminium III)
- Strontium [soil, industrial]: 7.1589e-5 kg; lognormal variance with pedigree 1.0144, pedigree (1,1,4,1,1)
  (same comment as for Aluminium III)
- Sulfur [soil, industrial]: 0.00030871 kg; lognormal variance with pedigree 0.79981, pedigree (1,1,4,1,1)
  (same comment as for Aluminium III)
- Thallium I [soil, industrial]: 3.2324e-7 kg; lognormal variance with pedigree 1.7226, pedigree (1,1,4,1,1)
  (same comment as for Aluminium III)
- Tin ion [soil, industrial]: 3.2205e-6 kg; lognormal variance with pedigree 1.425, pedigree (1,1,4,1,1)
  (same comment as for Aluminium III)
- Titanium ion [soil, industrial]: 0.00080114 kg; lognormal variance with pedigree 0.69319, pedigree (1,1,4,1,1)
  (same comment as for Aluminium III)
- Vanadium V [soil, industrial]: 0.0017186 kg; lognormal variance with pedigree 0.58505, pedigree (1,1,4,1,1)
  (same comment as for Aluminium III)
- Zinc II [soil, industrial]: 0.00028663 kg; lognormal variance with pedigree 0.8291, pedigree (1,1,4,1,1)
  (same comment as for Aluminium III)
