# treatment of sewage sludge, 97% water, WWT, WW from PV cell production, landfarming

Dataset: EcoSpold 2, unit process
Geography: RoW
Time period: 2000-01-01 to 2022-12-31
Technology level: current
Classification: ISIC rev.4 ecoinvent: 3821:Treatment and disposal of non-hazardous waste
Scenario: Business-as-Usual
System model: Allocation at the point of substitution
Generated by: Nikolia Stoikou
Database: ecoinvent
isCopyrightProtected: true

## General comment
The process represents the treatment of a waste (sewage sludge) that is exclusively produced from another waste treatment. Recommended use of this dataset: to be used within the specific chain of treatments for 'wastewater from PV cell production'. Share of biogenic carbon in the sludge: 0%. "PV" stands for "Photovoltaic".

## Included activities start
The activity starts with the waste being available for landfarming. Collection and transportation of the waste to this process is not included.

## Included activities end
The activity ends with the waste being treated and waste-specific emissions from the landfarming process are released to the environment (air, water and soil). The activity is considering local fate of emissions and the initial specific wastewater composition (generating the sewage sludge). Further, it includes provision of fertiliser functions for N, P, K, if present in the sludge.

## Geography
The site has mean annual temperature (MAT) of 16.743579766537 degC, mean annual precipitation (MAP) of 1250.84108527132 mm/year, mean annual actual evaporation (EAT) of 460.58904958214 mm/year. Climate will influence the local fate emissions based on the elemental composition of the sludge as well as water evaporation to air (= consumptive water use).
References: UN data, 2020. Precipitation, Environment Statistics Database, United Nations Statistics Division Available at: http://data.un.org/Data.aspx?q=precipitation&d=ENV&f=variableID%3a6;
World Bank, 2022. Surface area (sq.km), World Bank Group Available at: https://data.worldbank.org/indicator/AG.SRF.TOTL.K2;
Doka G.,2021. A model for composition-specific life cycle inventories of regionalised wastewater fates, Zurich, Switzerland. http://www.doka.ch/publications.htm

## Technology
Landfarming is the process of spreading a substrate on agricultural soil. Sewage sludge is generated in the wastewater treatment of wastewater from PV cell production. Spreading of liquid sewage sludge (97w% water content) on agricultural fields with mobile vacuum tanker.

## Reference product
- organic phosphorus fertiliser, as P2O5: 1 kg; By-product classification allocatable product; CPC 34659: Fertilizers n.e.c.; lognormal variance with pedigree 0.077375, pedigree (1,1,1,1,1)
  gross fertilizer function provided from sewage sludge spreading on agricultural fields.
  Uncertainty: Uncertainty calculated from upstream wastewater technosphere fate uncertainty, wastewater composition uncertainty, and treatment model uncertainty
  production volume 29540.1 kg
    Calculated in proportion to wastewater reference product.
  property oxygen content 0.563579
    Oxygen content (on a dry matter basis) of organic phosphorus fertiliser, as P2O5 is calculated from the molecular formula of the substance (Phosphorus).
  property phosphorus content 0.436421
    Phosphorus content (on a dry matter basis) of organic phosphorus fertiliser, as P2O5 is calculated from the molecular formula of the substance (Phosphorus).
  property price 0.241 EUR2005
    Set equal to the price of the corresponding inorganic fertiliser
  properties: carbon allocation 0 kg, carbon content 0, carbon content, fossil 0, carbon content, non-fossil 0, dry mass 1 kg, water content 0, water in wet mass 0 kg, wet mass 1 kg

## Inputs from technosphere
- acetic acid, without water, in 98% solution state: 4.07751e-6 kg
- aluminium alloy, AlMg3: 0.00104145 kg
- aluminium, wrought alloy: 9.7425e-6 kg
- ammonia, anhydrous, liquid: 5.28912e-7, 5.54356e-8, 5.39851e-7, 2.03736e-6, 2.72466e-7, 2.47818e-7, 5.86265e-6, 1.75136e-7 kg (8 suppliers, which the file names only by identifier); sum of these 9.71963e-6 kg
- argon, liquid: 3.7041e-5 kg
- cadmium telluride, semiconductor-grade: 1.5821e-5 kg
- calcium chloride: 3.11146e-5 kg
- carbon dioxide, liquid: 5.02721e-6, 2.33567e-8 kg (2 suppliers, which the file names only by identifier); sum of these 5.05057e-6 kg
- chemical, inorganic: 3.75912e-6 kg
- chromium: 2.04593e-6 kg
- copper, cathode: 2.1018e-6 kg
- electricity, medium voltage: 5.98751e-7, 8.08466e-7, 1.16273e-6, 2.42711e-7, 1.42163e-5, 0.00994001, 7.67799e-7, 2.87515e-7, 0.00707087, 0.00312554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 kWh (50 suppliers, which the file names only by identifier); sum of these 0.0569472 kWh
- ethanol, without water, in 99.7% solution state, from ethylene: 9.24554e-7 kg
- ethylvinylacetate, foil: 0.000246565 kg
- flat glass, uncoated: 1.475e-5, 0.00349858 kg (2 suppliers, which the file names only by identifier); sum of these 0.00351333 kg
- glass fibre reinforced plastic, polyamide, injection moulded: 6.99901e-5 kg
- hazardous waste, for incineration: -9.4885e-5, -7.37007e-7, -1.92649e-8 kg (3 suppliers, which the file names only by identifier); sum of these -9.56413e-5 kg
- heat, district or industrial, natural gas: 0.000860616, 2.99428e-5, 0.00608733, 0.00010003 MJ (4 suppliers, which the file names only by identifier); sum of these 0.00707792 MJ
- heat, district or industrial, other than natural gas: 0.00159429, 7.38604e-7 MJ (2 suppliers, which the file names only by identifier); sum of these 0.00159503 MJ
- hydrochloric acid, without water, in 30% solution state: 6.57845e-5 kg
- hydrogen fluoride: 5.44062e-5 kg
- hydrogen peroxide, without water, in 50% solution state: 3.3481e-6, 1.43584e-8 kg (2 suppliers, which the file names only by identifier); sum of these 3.36246e-6 kg
- isopropanol: 0.000115135, 5.76887e-9 kg (2 suppliers, which the file names only by identifier); sum of these 0.000115141 kg
- metallization paste, back side: 7.11196e-6 kg
- metallization paste, back side, aluminium: 0.000103715 kg
- metallization paste, front side: 1.06678e-5 kg
- multi-Si wafer: 0.000864702 m2
- multi-Si wafer, ribbon: 8.23202e-5 m2
- municipal solid waste: -2.61231e-9, -1.5347e-7, -9.4066e-10, -7.79246e-5, -6.58237e-10 kg (5 suppliers, which the file names only by identifier); sum of these -7.80823e-5 kg
- nitric acid, without water, in 50% solution state: 1.22834e-6, 1.48883e-7, 1.82512e-6, 4.53873e-6, 5.90248e-6, 2.17472e-6, 7.47963e-6, 1.83719e-8, 1.37464e-5, 1.7004e-5 kg (10 suppliers, which the file names only by identifier); sum of these 5.40667e-5 kg
- nitrogen, liquid: 0.00272015, 2.51295e-7 kg (2 suppliers, which the file names only by identifier); sum of these 0.0027204 kg
- oxygen, liquid: 0.000146984 kg
- phosphoric acid, fertiliser grade, without water, in 70% solution state: 1.10687e-5 kg
- phosphorus oxychloride: 2.30046e-6 kg
- photovoltaic cell factory: 5.76918e-10 unit
- photovoltaic panel factory: 2.598e-9 unit
- polystyrene, expandable: 5.87331e-7 kg
- section bar extrusion, aluminium: 0.00104145 kg
- silicone product: 6.18625e-7, 7.75027e-5 kg (2 suppliers, which the file names only by identifier); sum of these 7.81213e-5 kg
- single-Si wafer, photovoltaic: 0.000582982 m2
- sodium chloride, powder: 2.94224e-5 kg
- sodium hydroxide, without water, in 50% solution state: 0.000242407 kg
- sodium silicate, spray powder, 80%: 0.000107863 kg
- solar glass, low-iron: 0.00440001 kg
- solvent, organic: 2.0684e-6 kg
- steel, chromium steel 18/8: 7.26759e-6 kg
- sulfuric acid: 2.54529e-5, 7.24693e-8 kg (2 suppliers, which the file names only by identifier); sum of these 2.55254e-5 kg
- synthetic rubber: 1.83728e-5 kg
- tap water: 0.00129869, 0.0518535 kg (2 suppliers, which the file names only by identifier); sum of these 0.0531522 kg
- tetrafluoroethylene: 4.55159e-6 kg
- titanium dioxide: 2.04474e-9 kg
- waste, from silicon wafer production, inorganic: -0.00039767 kg
- wastewater from PV cell production: -0.000340019, -2.99447e-9 m3 (2 suppliers, which the file names only by identifier); sum of these -0.000340022 m3
- water, completely softened: 0.0847443, 0.113211 kg (2 suppliers, which the file names only by identifier); sum of these 0.197955 kg

## Inputs from nature
- Water, cooling, unspecified natural origin [natural resource, in water]: 0.00144016 m3

## Emissions to nature
- Aluminium III [air, urban air close to ground]: 1.1142e-6 kg
- Cadmium II [air, urban air close to ground]: 3.66206e-10 kg
- Carbon dioxide, fossil [air, urban air close to ground]: 5.05057e-6 kg
- Carbon monoxide, fossil [air, urban air close to ground]: 2.72861e-8 kg
- Ethane, 1,1,1,2-tetrafluoro-, HFC-134a [air, urban air close to ground]: 5.56609e-9 kg
- Ethane, hexafluoro-, HFC-116 [air, urban air close to ground]: 1.71071e-7 kg
- Hydrochloric acid [air, urban air close to ground]: 3.8404e-7 kg
- Hydrogen fluoride [air, urban air close to ground]: 6.9934e-9 kg
- Lead II [air, urban air close to ground]: 1.1142e-6 kg
- Methane, tetrafluoro-, R-14 [air, urban air close to ground]: 3.57155e-7 kg
- Methane, trifluoro-, HFC-23 [air, urban air close to ground]: 9.48514e-10 kg
- NMVOC, non-methane volatile organic compounds [air, urban air close to ground]: 0.000279142 kg
- Nitric acid [air, urban air close to ground]: 6.36391e-8 kg
- Nitrogen oxides [air, urban air close to ground]: 6.19453e-7 kg
- Particulate Matter, < 2.5 um [air, urban air close to ground]: 3.8404e-6 kg
- Silicon [air, urban air close to ground]: 1.04901e-7 kg
- Silver I [air, urban air close to ground]: 1.1142e-6 kg
- Sodium [air, urban air close to ground]: 6.9934e-8 kg
- Tin ion [air, urban air close to ground]: 1.1142e-6 kg
- Water [air, unspecified]: 0.000587755 m3
- Water [air, urban air close to ground]: 2.65981e-5 m3
- BOD5, Biological Oxygen Demand [water, unspecified]: 2.07129e-7 kg
- COD, Chemical Oxygen Demand [water, unspecified]: 6.9772e-7 kg
- Cadmium II [water, unspecified]: 9.94694e-11 kg
- Copper ion [water, unspecified]: 5.40828e-10 kg
- DOC, Dissolved Organic Carbon [water, unspecified]: 2.58415e-7 kg
- Suspended solids, unspecified [water, unspecified]: 2.57263e-7 kg
- TOC, Total Organic Carbon [water, unspecified]: 2.58415e-7 kg
- Water [water, unspecified]: 0.000736892 m3
