# transistor production, wired, big size, through-hole mounting

Dataset: EcoSpold 2, unit process
Geography: GLO
Time period: 1994-01-01 to 2022-12-31
Technology level: current
Classification: EcoSpold01Categories: electronics/component
Classification: ISIC rev.4 ecoinvent: 2610:Manufacture of electronic components and boards
Tags: ConvertedDataset
Scenario: Business-as-Usual
System model: Allocation at the point of substitution
Generated by: Roland Hischier
Published in: Hischier R. 2007
Database: ecoinvent
isCopyrightProtected: true

## General comment
This dataset represents the production of 1 kg of big size wired, transistors for through-hole mounting. It is based on the assumption that a typical wired, big-size transistor in electronic modules has an average weight of 6.34 g. The data represent a typical wired,big-size, transistor used in the information and communication technology. Material data are taken from datasheets of producers of such transistors. Infrastructure and production efforts are based on own assumptions. The production efforts represent not a specifictransistor type and have thus, accordingly higher uncertainties.
[This dataset was already contained in the ecoinvent database version 2. It was not individually updated during the transfer to ecoinvent version 3. Life Cycle Impact Assessment results may still have changed, as they are affected by changes in the supply chain, i.e. in other datasets. This dataset was generated following the ecoinvent quality guidelines for version 2. It may have been subject to central changes described in the ecoinvent version 3 change report (http://www.ecoinvent.org/database/ecoinvent-version-3/reports-of-changes/), and the results of the central updates were reviewed extensively. The changes added e.g. consistent water flows and other information throughout the database. The documentation of this dataset can be found in the ecoinvent reports of version 2, which are still available via the ecoinvent website. The change report linked above covers all central changes that were made during the conversion process.]

## Included activities start
From reception of metals and plastics at the factory gate.

## Included activities end
This dataset includes raw material input and production efforts for the production of currently used big-sized wired transistors for through-hole mounting technology.

## Geography
Data represent a global valuable composition of big wired transistors.

## Technology
average production composed of: Si-crystal die bonding; wire bonding; encapsulation; plating; triming; forming and marking.

## Reference product
- transistor, wired, big size, through-hole mounting: 1 kg; By-product classification allocatable product; CPC 47150: Diodes, transistors and similar semi-conductor devices; photosensitive semi-conductor devices; light emitting […]
  EcoSpold01Location=GLO
  production volume 1 kg
    Dummy value to be replaced by value to be calculated from the demand for this treatment activity
  property carbon content, fossil 0.0946006
    Calculated as the addition of C contents in the product composition, and referred to 1 kg DM transistor.
  property price 98.7581 EUR2005
    Calculated based on inputs: The price of the product has been calculated as a sum of the values of the material and energy inputs for this product. This value is therefore a rough estimation. It may underestimate the real price since there are additional expenses when producing any product. These expences can include for example labour costs, treatment of waste materials and profit for the producer. Please consider carefully whether this level of data quality is acceptable for your application.
  properties: carbon allocation 0.0946006 kg, carbon content 0.0946006, carbon content, non-fossil 0, dry mass 1 kg, water content 0, water in wet mass 0 kg, wet mass 1 kg

## Inputs from technosphere
- aluminium oxide, non-metallurgical: 0.0113368, 0.0669632 kg (2 suppliers, which the file names only by identifier); sum of these 0.0783 kg; source Behrendt S 1998; lognormal variance with pedigree 0.042, pedigree (1,4,5,1,1)
  EcoSpold01Location=RER
  Calculated Value. The production of 1 kg of transistors lead to a waste amount of 4.9 kg unused raw materials. Hence, this dataset here has an input of 5.9 kg of raw materials per kg of transistor. The split to the different raw materials (metals, plastics, etc.) is based on the reported material specifications.
  Further references:
  ST Microelectronics (2004) Chemical Content of Semiconductor Packaging. PDF from <http://www.stmicroelectronics.com/stonline/company/environm/report03/envi03.pdf>.
  Philips Semiconductors (2002) Chemical Content of Semiconductor Devices 2002/2003. Philips Semiconductors, Austin / Zoetermeer / Hong Kong / Tokyo
  Uncertainty: average from literature & company information
  properties: dry mass 1 kg, wet mass 1 kg
- aluminium, wrought alloy: 0.00232 kg; source Behrendt S 1998; lognormal variance with pedigree 0.042, pedigree (1,4,5,1,1)
  Calculated Value. The production of 1 kg of transistors lead to a waste amount of 4.9 kg unused raw materials. Hence, this dataset here has an input of 5.9 kg of raw materials per kg of transistor. The split to the different raw materials (metals, plastics, etc.) is based on the reported material specifications.
  Further references:
  ST Microelectronics (2004) Chemical Content of Semiconductor Packaging. PDF from <http://www.stmicroelectronics.com/stonline/company/environm/report03/envi03.pdf>.
  Philips Semiconductors (2002) Chemical Content of Semiconductor Devices 2002/2003. Philips Semiconductors, Austin / Zoetermeer / Hong Kong / Tokyo
  EcoSpold01Location=RER
  Uncertainty: company information
  properties: dry mass 1 kg, wet mass 1 kg
- chemical, inorganic: 0.09512 kg; source Behrendt S 1998; lognormal variance with pedigree 0.042, pedigree (1,4,5,1,1)
  Calculated Value. The production of 1 kg of transistors lead to a waste amount of 4.9 kg unused raw materials. Hence, this dataset here has an input of 5.9 kg of raw materials per kg of transistor. The split to the different raw materials (metals, plastics, etc.) is based on the reported material specifications.
  Further references:
  ST Microelectronics (2004) Chemical Content of Semiconductor Packaging. PDF from <http://www.stmicroelectronics.com/stonline/company/environm/report03/envi03.pdf>.
  Philips Semiconductors (2002) Chemical Content of Semiconductor Devices 2002/2003. Philips Semiconductors, Austin / Zoetermeer / Hong Kong / Tokyo
  EcoSpold01Location=GLO
  Uncertainty: company information
  properties: carbon content, fossil 0.003, dry mass 1 kg, wet mass 1 kg
  note on carbon content, fossil: This dataset is an unweighted average of 20 inorganic substances (listed in Tab 88.1, ecoinvent v2.2 report 8, part II), being part of the top100 chemicals included in this database. The C-content has also been calculated as an unweighted average of the C content of the substances composing this dataset.
- copper, cathode: 2.0538 kg; source Behrendt S 1998; lognormal variance with pedigree 0.042, pedigree (1,4,5,1,1)
  (same comment as for aluminium, wrought alloy)
  properties: dry mass 1 kg, wet mass 1 kg
- epoxy resin insulator, SiO2: 2.4128 kg; source Behrendt S 1998; lognormal variance with pedigree 0.042, pedigree (1,4,5,1,1)
  (same comment as for aluminium oxide, non-metallurgical)
  properties: carbon content, fossil 0.1693, dry mass 1 kg, heating value, net 5.13 MJ, wet mass 1 kg
  note on carbon content, fossil: Cast resin insulators are produced from epoxy resins, hardeners and a filling material. Aluminium oxide, dolomite and quartz powder are well-known filling materials.The filling material is assumed to be 60% of cast resin insulators (ecoinvent v2.2 report 8. Part 31)
- glass tube, borosilicate: 0.07482 kg; source Behrendt S 1998; lognormal variance with pedigree 0.042, pedigree (1,4,5,1,1)
  Calculated Value. The production of 1 kg of transistors lead to a waste amount of 4.9 kg unused raw materials. Hence, this dataset here has an input of 5.9 kg of raw materials per kg of transistor. The split to the different raw materials (metals, plastics, etc.) is based on the reported material specifications.
  Further references:
  ST Microelectronics (2004) Chemical Content of Semiconductor Packaging. PDF from <http://www.stmicroelectronics.com/stonline/company/environm/report03/envi03.pdf>.
  Philips Semiconductors (2002) Chemical Content of Semiconductor Devices 2002/2003. Philips Semiconductors, Austin / Zoetermeer / Hong Kong / Tokyo
  EcoSpold01Location=DE
  Uncertainty: average from literature & company information
  properties: dry mass 1 kg, wet mass 1 kg
- lead: 0.21402 kg; source Behrendt S 1998; lognormal variance with pedigree 0.042, pedigree (1,4,5,1,1)
  Calculated Value. The production of 1 kg of transistors lead to a waste amount of 4.9 kg unused raw materials. Hence, this dataset here has an input of 5.9 kg of raw materials per kg of transistor. The split to the different raw materials (metals, plastics, etc.) is based on the reported material specifications.
  Further references:
  ST Microelectronics (2004) Chemical Content of Semiconductor Packaging. PDF from <http://www.stmicroelectronics.com/stonline/company/environm/report03/envi03.pdf>.
  Philips Semiconductors (2002) Chemical Content of Semiconductor Devices 2002/2003. Philips Semiconductors, Austin / Zoetermeer / Hong Kong / Tokyo
  EcoSpold01Location=RER
  Uncertainty: average from literature & company information
  properties: dry mass 1 kg, wet mass 1 kg
- nickel, class 1: 0.00754 kg; source Behrendt S 1998; lognormal variance with pedigree 0.042, pedigree (1,4,5,1,1)
  EcoSpold01Location=GLO
  Calculated Value. The production of 1 kg of transistors lead to a waste amount of 4.9 kg unused raw materials. Hence, this dataset here has an input of 5.9 kg of raw materials per kg of transistor. The split to the different raw materials (metals, plastics, etc.) is based on the reported material specifications.
  Further references:
  ST Microelectronics (2004) Chemical Content of Semiconductor Packaging. PDF from <http://www.stmicroelectronics.com/stonline/company/environm/report03/envi03.pdf>.
  Philips Semiconductors (2002) Chemical Content of Semiconductor Devices 2002/2003. Philips Semiconductors, Austin / Zoetermeer / Hong Kong / Tokyo
  Uncertainty: company information
  properties: dry mass 1 kg, wet mass 1 kg
- nylon 6: 0.140549, 0.0694112 kg (2 suppliers, which the file names only by identifier); sum of these 0.20996 kg; source Behrendt S 1998; lognormal variance with pedigree 0.042, pedigree (1,4,5,1,1)
  (same comment as for lead)
  properties: carbon content, fossil 0.637168, dry mass 1 kg, heating value, net 30.9 MJ, wet mass 1 kg
  note on carbon content, fossil: It is a chain of caprolactam molecules, originating from aminocarboxylic acids - here caproic acid or caprolactam. The structure of nylon 6 is -(NH-(CH2)5-CO)n-, C6H11NO (ecoinvent v2.2 report 11_II). MW=113 g/mol
  note on heating value, net: Assumed equal to Nylon-66. Reference: Walters, R. N., Hackett, S. M. and Lyon, R. E. (2000) ‘Heats of combustion of high temperature polymers’, Fire and Materials, 24(5), pp. 245–252. doi: 10.1002/1099-1018(200009/10)24:5<245::AID-FAM744>3.0.CO;2-7.
- pig iron: 0.0115542, 0.124746 kg (2 suppliers, which the file names only by identifier); sum of these 0.1363 kg; source Behrendt S 1998; lognormal variance with pedigree 0.042, pedigree (1,4,5,1,1)
  (same comment as for chemical, inorganic)
  properties: carbon content, fossil 0.045, dry mass 1 kg, wet mass 1 kg
  note on carbon content, fossil: Pig iron is the iron produced in the blast furnace. It is an alloy of 94% Fe and more than 2% C (world average 4.5%). (ecoinvent v2.2 report 10_partII)
- silicon, electronics grade: 0.01624 kg; source Behrendt S 1998; lognormal variance with pedigree 0.042, pedigree (1,4,5,1,1)
  EcoSpold01Location=DE
  Calculated Value. The production of 1 kg of transistors lead to a waste amount of 4.9 kg unused raw materials. Hence, this dataset here has an input of 5.9 kg of raw materials per kg of transistor. The split to the different raw materials (metals, plastics, etc.) is based on the reported material specifications.
  Further references:
  ST Microelectronics (2004) Chemical Content of Semiconductor Packaging. PDF from <http://www.stmicroelectronics.com/stonline/company/environm/report03/envi03.pdf>.
  Philips Semiconductors (2002) Chemical Content of Semiconductor Devices 2002/2003. Philips Semiconductors, Austin / Zoetermeer / Hong Kong / Tokyo
  Uncertainty: average from literature & company information
  properties: dry mass 1 kg, wet mass 1 kg
- tin: 0.47038 kg; source Behrendt S 1998; lognormal variance with pedigree 0.042, pedigree (1,4,5,1,1)
  (same comment as for lead)
  properties: dry mass 1 kg, wet mass 1 kg
- transistor, auxilliaries and energy use: 1 kg; lognormal variance with pedigree 0.134, pedigree (3,4,5,1,4)
  Estimation - details see this other activity dataset
  EcoSpold01Location=GLO
  Uncertainty: rough estimation
- zinc: 0.02842 kg; source Behrendt S 1998; lognormal variance with pedigree 0.042, pedigree (1,4,5,1,1)
  (same comment as for aluminium oxide, non-metallurgical)
  properties: dry mass 1 kg, wet mass 1 kg

## Sampling procedure
literature

## Review by Rolf Frischknecht 2007-11-08
passed.

## Review by Roland Hischier 2011-09-20
Transfer of documentation done.
