# treatment of wastewater from medium density board production, wastewater treatment

Dataset: EcoSpold 2, unit process
Geography: RoW
Time period: 2010-01-01 to 2022-12-31
Technology level: current
Classification: ISIC rev.4 ecoinvent: 3700:Sewerage
Scenario: Business-as-Usual
System model: Allocation at the point of substitution
Generated by: Nikolia Stoikou
Database: ecoinvent
isCopyrightProtected: true

## General comment
This dataset represents the treatment of a wastewater, generated from an ordinary transforming activity. Purification in wastewater treatment of 'wastewater from medium density board production'. Recommended use of this dataset: to be used for wastewaters, generated from ordinary transforming activities, of equal or similar composition. The wastewater has a content of TOC: 0.21975 kg/m3, COD: 0.85673 kg/m3 and BOD: 0.41436 kg/m3. TOC is equal to C present in the wastewater, COD is calculated as TOC/0.2565 and BOD is calculated as COD/0.53034. Detailed elemental composition can be found in the properties of the wastewater treated. Share of biogenic carbon in the sludge: 100%.

## Included activities start
The activity starts with the wastewater being available at the gate of the treatment facility. Collection and transportation of the wastewater to the treatment plant is not included.

## Included activities end
The activity ends with the wastewater being treated and waste-specific emissions released to the environment. Expenditures from treatment of wastewater in waste treatment plant are included as well as relevant infrastructure of the plant. Emissions from any sludge digestion, biogas generation and utilization (heeding specific wastewater composition) are also included. Waste-specific direct emissions of untreated wastewater and required territory-specific infrastructure for sewers are not contained within this dataset but instead in the regional market datasets for this wastewater.

## Geography
The site has mean annual temperature (MAT) of 16.743579766537 degC, mean annual precipitation (MAP) of 1250.84108527132 mm/year, mean annual actual evaporation (EAT) of 460.58904958214 mm/year. In the WWT plant, 0% of its water input are lost due to evaporation from pools, 0.0108% of water is *gained* from organic mass degradation, and 0.00535% is removed off site via sludge disposal. (References: UN data, 2020. Precipitation, Environment Statistics Database, United Nations Statistics Division Available at: http://data.un.org/Data.aspx?q=precipitation&d=ENV&f=variableID%3a6; World Bank, 2022. Surface area (sq.km), World Bank Group Available at: https://data.worldbank.org/indicator/AG.SRF.TOTL.K2; Doka G.,2021. A model for composition-specific life cycle inventories of regionalised wastewater fates, Zurich, Switzerland. http://www.doka.ch/publications.htm)

## Technology
This is an inventory for the disposal of a selected wastewater in Global. The reference unit is 1 m3 wastewater input. This activity represents the treatment of a specific wastewater in a WWT plant (while direct emissions and sewering are heeded in the upstream market dataset for this wastewater). The size of the treatment plant infrastructure is for a supranational region average territory situation. The assumed size of the WWTP treats 82.2 Mio m3 per year. The mixture of WWTP with one, two, or three stages is 8.2%-41.2%-50.6%. The actual, waste-specific oxygen requirement in the biological stages is 0.1081261 kg O. The digestion process produces 21.634535 litres of biogas with an energy content of 0.4907938MJ. 60.5% of the biogas is utilized for energy. The remainder is flared. The gross electric efficiency is 26.564%. The gross thermal efficiency is 47.853%. After digestion, the remaining total sludge mass (dry matter) is 0.1514kg DM.

## Reference product
- iron scrap, sorted, pressed: 1 kg; By-product classification Recyclable; CPC 39310: Slag, dross, scalings and other waste from the manufacture of iron or steel; lognormal variance with pedigree 0.3611, pedigree (1,1,1,1,1)
  scrap output from used infrastructure for wastewater treatment plant.
  Uncertainty: Uncertainty calculated from wastewater technosphere fate uncertainty and treatment infrastructure uncertainty.
  production volume 4378.26 kg
    Calculated in proportion to wastewater reference product.
  property price 0.175 EUR2005
    Temporary price data. Calculated as 90% of purchasers price based on: 2005 import and export prices (total trades (USD) divided by total weight (kg) in biggest economies of the world: EU27, USA, Brasil, China, India, Japan and Russia) from UN Commodity Trade Statistics Database (http://data.un.org/Explorer.aspxDatabase [Accessed 2011.06.20]). Commodity: Waste or scrap, of cast iron
  properties: carbon allocation 0 kg, carbon content 0, carbon content, fossil 0, carbon content, non-fossil 0, dry mass 1 kg, water content 0, water in wet mass 0 kg, wet mass 1 kg

## Inputs from technosphere
- aluminium sulfate, powder: 1.57492e-5 kg
- biowaste: -0.000623753 kg
- chemical, organic: 0.000618227 kg
- diesel, burned in building machine: 0.0245909 MJ
- dust collector, electrostatic precipitator, for industrial use: 3.84877e-9 unit
- electricity, medium voltage: 0.0347876, 0.0108549, 0.000323258, 0.00164939, 0.0995943, 0.00544766 kWh (6 suppliers, which the file names only by identifier); sum of these 0.152657 kWh
- furnace, wood chips, softwood storage area, 1000kW: 1.92327e-8 unit
- furnace, wood chips, with silo, 5000kW: 8.12844e-8 unit
- hazardous waste, for incineration: -0.000548588 kg
- heat, district or industrial, natural gas: 0.741411 MJ
- heat, district or industrial, other than natural gas: 0.0174992, 0.0106574 MJ (2 suppliers, which the file names only by identifier); sum of these 0.0281565 MJ
- lubricating oil: 9.05581e-5 kg
- melamine formaldehyde resin: 0.0290118 kg
- paraffin: 0.00326037 kg
- pulpwood, hardwood, measured as solid wood under bark: 5.14444e-6 m3
- pulpwood, softwood, measured as solid wood under bark: 0.000431266 m3
- sawdust, wet, measured as dry mass: 0.000414508, 0.020322 kg (2 suppliers, which the file names only by identifier); sum of these 0.0207365 kg
- slab and siding, softwood, wet, measured as dry mass: 0.00144451, 0.00560121 kg (2 suppliers, which the file names only by identifier); sum of these 0.00704571 kg
- tap water: 0.000371461, 0.0154802, 0.000613901, 0.00114551, 0.177147, 0.000402712, 0.00308592 kg (7 suppliers, which the file names only by identifier); sum of these 0.198247 kg
- urea: 0.000244962, 3.09809e-5, 0.000209181 kg (3 suppliers, which the file names only by identifier); sum of these 0.000485124 kg
- urea formaldehyde resin: 0.0321892 kg
- wastewater from medium density board production: -0.000281138 m3
- wood ash mixture, pure: -0.00138499 kg
- wood chips, dry, measured as dry mass: 0.25386 kg
- wood chips, from post-consumer wood, measured as dry mass: 0.0766739 kg
- wood chips, wet, measured as dry mass: 9.0414e-7, 0.000399044 kg (2 suppliers, which the file names only by identifier); sum of these 0.000399948 kg
- wooden board factory, organic bonded boards: 2.63145e-11 unit

## Inputs from nature
- Water, cooling, unspecified natural origin [natural resource, in water]: 0.000198247 m3
- Water, river [natural resource, in water]: 0.000223114 m3
- Water, well, in ground [natural resource, in water]: 1.94102e-7 m3

## Emissions to nature
- Acetaldehyde [air, urban air close to ground]: 4.15108e-7 kg
- Ammonia [air, urban air close to ground]: 5.03368e-6 kg
- Arsenic ion [air, urban air close to ground]: 2.90964e-9 kg
- Benzene [air, urban air close to ground]: 2.64778e-6 kg
- Benzene, ethyl- [air, urban air close to ground]: 8.72893e-8 kg
- Benzene, hexachloro- [air, urban air close to ground]: 2.09494e-14 kg
- Benzo(a)pyrene [air, urban air close to ground]: 1.45482e-9 kg
- Bromine [air, urban air close to ground]: 1.74579e-7 kg
- Cadmium II [air, urban air close to ground]: 2.03675e-9 kg
- Calcium [air, urban air close to ground]: 1.70214e-5 kg
- Carbon dioxide, non-fossil [air, urban air close to ground]: 0.296784 kg
- Carbon monoxide, non-fossil [air, urban air close to ground]: 0.000581929 kg
- Chlorine [air, urban air close to ground]: 5.23736e-7 kg
- Chromium III [air, urban air close to ground]: 1.15222e-8 kg
- Chromium VI [air, urban air close to ground]: 1.16386e-10 kg
- Copper ion [air, urban air close to ground]: 6.40122e-8 kg
- Dinitrogen monoxide [air, urban air close to ground]: 6.69218e-6 kg
- Dioxins, measured as 2,3,7,8-tetrachlorodibenzo-p-dioxin [air, urban air close to ground]: 8.72893e-14 kg
- Fluorine [air, urban air close to ground]: 1.45482e-7 kg
- Formaldehyde [air, urban air close to ground]: 9.57026e-5 kg
- Hydrocarbons, aliphatic, alkanes, unspecified [air, urban air close to ground]: 2.64778e-6 kg
- Hydrocarbons, aliphatic, unsaturated [air, urban air close to ground]: 9.0199e-6 kg
- Lead II [air, urban air close to ground]: 7.27411e-8 kg
- Magnesium [air, urban air close to ground]: 1.04747e-6 kg
- Manganese II [air, urban air close to ground]: 4.94639e-7 kg
- Mercury II [air, urban air close to ground]: 8.72893e-10 kg
- Methane, non-fossil [air, urban air close to ground]: 4.36447e-6 kg
- Methanol [air, non-urban air or from high stacks]: 1.24336e-5 kg
- NMVOC, non-methane volatile organic compounds [air, urban air close to ground]: 0.000273124 kg
- Nickel II [air, urban air close to ground]: 1.74579e-8 kg
- Nitrogen oxides [air, urban air close to ground]: 0.000349157 kg
- PAH, polycyclic aromatic hydrocarbons [air, urban air close to ground]: 3.2297e-8 kg
- Particulate Matter, < 2.5 um [air, urban air close to ground]: 7.27411e-6 kg
- Particulate Matter, > 10 um [air, unspecified]: 5.53986e-5 kg
- Phenol, pentachloro- [air, urban air close to ground]: 2.35681e-11 kg
- Phosphorus [air, urban air close to ground]: 8.72893e-7 kg
- Potassium I [air, urban air close to ground]: 6.80857e-5 kg
- Sodium [air, urban air close to ground]: 3.78254e-6 kg
- Sulfur dioxide [air, urban air close to ground]: 7.27411e-6 kg
- Toluene [air, urban air close to ground]: 8.72893e-7 kg
- Zinc II [air, urban air close to ground]: 8.72893e-7 kg
- m-Xylene [air, urban air close to ground]: 3.49157e-7 kg
