# treatment of sewage sludge, 97% water, WWT, WW from liquid crystal production, landfarming

Dataset: EcoSpold 2, unit process
Geography: CH
Time period: 2000-01-01 to 2022-12-31
Technology level: current
Classification: ISIC rev.4 ecoinvent: 3821:Treatment and disposal of non-hazardous waste
Scenario: Business-as-Usual
System model: Allocation at the point of substitution
Generated by: Nikolia Stoikou
Database: ecoinvent
isCopyrightProtected: true

## General comment
The process represents the treatment of a waste (sewage sludge) that is exclusively produced from another waste treatment. Recommended use of this dataset: to be used within the specific chain of treatments for 'wastewater from liquid crystal production'. Share of biogenic carbon in the sludge: 0%.

## Included activities start
The activity starts with the waste being available for landfarming. Collection and transportation of the waste to this process is not included.

## Included activities end
The activity ends with the waste being treated and waste-specific emissions from the landfarming process are released to the environment (air, water and soil). The activity is considering local fate of emissions and the initial specific wastewater composition (generating the sewage sludge). Further, it includes provision of fertiliser functions for N, P, K, if present in the sludge.

## Geography
The site has mean annual temperature (MAT) of 9.5 degC, mean annual precipitation (MAP) of 1483.00559816076 mm/year, mean annual actual evaporation (EAT) of 528.63778611689 mm/year. Climate will influence the local fate emissions based on the elemental composition of the sludge as well as water evaporation to air (= consumptive water use).
References: UN data, 2020. Precipitation, Environment Statistics Database, United Nations Statistics Division Available at: http://data.un.org/Data.aspx?q=precipitation&d=ENV&f=variableID%3a6;
World Bank, 2022. Surface area (sq.km), World Bank Group Available at: https://data.worldbank.org/indicator/AG.SRF.TOTL.K2;
MeteoSwiss, 2022. Data on Swiss temperature mean, Federal Department of Home Affairs FDHA. Federal Office of Meteorology and Climatology. Swiss Climate Available at: https://www.MeteoSwiss.admin.ch/home/climate/swiss-climate-in-detail/Swiss-temperature-mean/Data-on-the-Swiss-temperature-mean.html?query=TEMPERATURE+DATA&topic=/content/MeteoSwiss/tags/topics/klima&pageIndex=0&tab=search_tab;
Doka G.,2021. A model for composition-specific life cycle inventories of regionalised wastewater fates, Zurich, Switzerland. http://www.doka.ch/publications.htm

## Technology
Landfarming is the process of spreading a substrate on agricultural soil. Sewage sludge is generated in the wastewater treatment of wastewater from liquid crystal production. Spreading of liquid sewage sludge (97w% water content) on agricultural fields with mobile vacuum tanker.

## Reference product
- organic nitrogen fertiliser, as N: 1 kg; By-product classification allocatable product; CPC 34659: Fertilizers n.e.c.
  gross fertilizer function provided from sewage sludge spreading on agricultural fields.
  production volume 6.8481e-8 kg
    Calculated in proportion to wastewater reference product.
  property nitrogen content 1
    Nitrogen content (on a dry matter basis) of organic nitrogen fertiliser, as N is calculated from the molecular formula of the substance (Nitrogen).
  property price 0.473 EUR2005
    Set equal to the price of the corresponding inorganic fertiliser
  properties: carbon allocation 0 kg, carbon content 0, carbon content, fossil 0, carbon content, non-fossil 0, dry mass 1 kg, water content 0, water in wet mass 0 kg, wet mass 1 kg

## Inputs from technosphere
- acetone, liquid: 0.000648695, 0.00209745 kg (2 suppliers, which the file names only by identifier); sum of these 0.00274615 kg
- borax, anhydrous, powder: 2.4341e-5 kg
- boric acid, anhydrous, powder: 0.00019463 kg
- carbon dioxide, liquid: 0.00106162, 0.000223473 kg (2 suppliers, which the file names only by identifier); sum of these 0.00128509 kg
- chemical factory, organics: 8.53171e-12 unit
- chemical, organic: 0.0134347 kg
- cyclohexane: 0.00103714 kg
- dimethyl sulfoxide: 0.00381261 kg
- dipropylene glycol monomethyl ether: 0.00883982, 0.00186214 kg (2 suppliers, which the file names only by identifier); sum of these 0.010702 kg
- electricity, medium voltage: 3.4364 kWh
- ethanol, without water, in 99.7% solution state, from ethylene: 0.000966751, 0.00215266 kg (2 suppliers, which the file names only by identifier); sum of these 0.00311941 kg
- ethyl acetate: 0.000258084 kg
- heat, district or industrial, natural gas: 1.04582 MJ
- heat, district or industrial, other than natural gas: 3.33249 MJ
- heptane: 0.00274615 kg
- hydrochloric acid, without water, in 30% solution state: 0.000270614, 0.00121177 kg (2 suppliers, which the file names only by identifier); sum of these 0.00148239 kg
- hydrogen, liquid: 1.50132e-7, 6.87042e-7 kg (2 suppliers, which the file names only by identifier); sum of these 8.37174e-7 kg
- inert waste: -3.65801e-5, -3.15053e-7, -0.00012894 kg (3 suppliers, which the file names only by identifier); sum of these -0.000165835 kg
- methyl ethyl ketone: 9.36886e-5, 3.53536e-5 kg (2 suppliers, which the file names only by identifier); sum of these 0.000129042 kg
- monochloropentafluoroethane: 7.30528e-5 kg
- municipal solid waste: -3.82071e-6, -0.000224462, -1.37579e-6, -0.00270216, -9.62722e-7 kg (5 suppliers, which the file names only by identifier); sum of these -0.00293278 kg
- nitric acid, without water, in 50% solution state: 6.51799e-5, 0.000847941, 9.68472e-5, 0.000240841, 0.000313207, 0.000115398, 0.000396896, 0.000104635, 9.64888e-5, 0.000735327 kg (10 suppliers, which the file names only by identifier); sum of these 0.00301276 kg
- nitrogen, liquid: 0.0244757, 0.00671841 kg (2 suppliers, which the file names only by identifier); sum of these 0.0311941 kg
- polyester resin, unsaturated: 2.12349e-5, 0.0001454 kg (2 suppliers, which the file names only by identifier); sum of these 0.000166635 kg
- polyethylene terephthalate, granulate, amorphous: 0.0169035 kg
- solvent, organic: 0.00220481 kg
- spent solvent mixture: -0.0164127, -0.000150247, -0.006413 kg (3 suppliers, which the file names only by identifier); sum of these -0.0229759 kg
- steam, in chemical industry: 0.00579448, 0.0328648 kg (2 suppliers, which the file names only by identifier); sum of these 0.0386593 kg
- sulfuric acid: 0.0037252, 0.000487334 kg (2 suppliers, which the file names only by identifier); sum of these 0.00421253 kg
- tetrahydrofuran: 0.00101847 kg
- toluene, liquid: 0.00646936, 0.000862581 kg (2 suppliers, which the file names only by identifier); sum of these 0.00733194 kg
- wastewater from liquid crystal production: -4.68302e-5, -2.26465e-7 m3 (2 suppliers, which the file names only by identifier); sum of these -4.70567e-5 m3

## Inputs from nature
- Water, unspecified natural origin [natural resource, in water]: 0.0554561 m3

## Emissions to nature
- Ethyl acetate [air, urban air close to ground]: 6.50543e-7 kg
- Heptane [air, urban air close to ground]: 2.07161e-5 kg
- Hydrocarbons, chlorinated [air, urban air close to ground]: 7.46525e-5 kg
- Hydrochloric acid [air, urban air close to ground]: 1.95163e-6 kg
- Methyl ethyl ketone [air, urban air close to ground]: 3.59932e-5 kg
- NMVOC, non-methane volatile organic compounds [air, urban air close to ground]: 2.07161e-5 kg
- Toluene [air, urban air close to ground]: 1.45039e-5 kg
- Water [air, unspecified]: 0.00338282 m3
- BOD5, Biological Oxygen Demand [water, surface water]: 0.000357265 kg
- COD, Chemical Oxygen Demand [water, surface water]: 0.000589221 kg
- DOC, Dissolved Organic Carbon [water, surface water]: 0.00021823 kg
- Nitrogen [water, surface water]: 0.000152238 kg
- Phosphorus [water, surface water]: 6.61208e-6 kg
- Suspended solids, unspecified [water, surface water]: 0.000172234 kg
- TOC, Total Organic Carbon [water, surface water]: 0.00021823 kg
- Water [water, unspecified]: 0.0520263 m3
