# heat, at cogen, with supporting oil furnace 60%, 160kWe Jakobsberg, allocation exergy

Dataset: EcoSpold 2, unit process
Geography: RoW
Time period: 2000-01-01 to 2022-12-31
Technology level: current
Classification: ISIC rev.4 ecoinvent: 3530:Steam and air conditioning supply
Classification: EcoSpold01Categories: natural gas/cogeneration
Tags: ConvertedDataset
Scenario: Business-as-Usual
System model: Allocation at the point of substitution
Generated by: Thomas Heck
Published in: Heck, T. 2007
Database: ecoinvent
isCopyrightProtected: true

## General comment
Heat at system i.e. distribution is not included.
[This dataset was already contained in the ecoinvent database version 2. It was not individually updated during the transfer to ecoinvent version 3. Life Cycle Impact Assessment results may still have changed, as they are affected by changes in the supply chain, i.e. in other datasets. This dataset was generated following the ecoinvent quality guidelines for version 2. It may have been subject to central changes described in the ecoinvent version 3 change report (http://www.ecoinvent.org/database/ecoinvent-version-3/reports-of-changes/), and the results of the central updates were reviewed extensively. The changes added e.g. consistent water flows and other information throughout the database. The documentation of this dataset can be found in the ecoinvent reports of version 2, which are still available via the ecoinvent website. The change report linked above covers all central changes that were made during the conversion process.]

## Included activities end
The module includes heat from module cogen (i.e. the cogeneration unit and a heat pump) and from two oil boilers.

## Geography
Efficiencies refer to a specific plant in Switzerland.

## Technology
Specific cogeneration unit installed in Switzerland.

## Reference product
- heat, central or small-scale, Jakobsberg: 1 MJ; By-product classification allocatable product; CPC 17300: Steam and hot water
  EcoSpold01Location=CH
  production volume 3.96633 MJ
    This is a placeholder value that does not reflect real-world production volumes. This dataset does not currently require a real-world production volume to work in the database framework, and no actual data were collected yet. This has no negative effect on the results of the ecoinvent database.
  property price 0.0106 EUR2005
    Average European district heat price from Ecoheatcool and Euroheat 2005-2006, Ecoheat Work package 1: The European heat market. Final report. 10.6 EUR/GJ i s the price of district heat. http://www.solarthermalworld.org/files/Ecoheatcool%20WP1%20Web.pdf?download
  properties: carbon allocation 0 kg, carbon content 0

## Inputs from technosphere
- heat, central or small-scale, natural gas and heat pump, Jakobsberg: 0.6 MJ; lognormal variance with pedigree 0.042, pedigree (1,1,5,5,1)
  data from operators; basic uncertainty
  EcoSpold01Location=CH
- heat, central or small-scale, other than natural gas: 0.4 MJ; lognormal variance with pedigree 0.042, pedigree (1,1,5,5,1)
  data from operators; basic uncertainty
  EcoSpold01Location=CH
  properties: heating value, net 1 MJ

## Sampling procedure
Operator information

## Extrapolations
none This dataset has been copied from an original dataset covering the geography CH. The uncertainty has been adjusted accordingly.

## Review by Gerald Rebitzer (obsolete) 2004-04-02
prepared
