# combine harvesting

Dataset: EcoSpold 2, unit process
Geography: BR
Time period: 2012-01-01 to 2022-12-31
Technology level: current
Classification: EcoSpold01Categories: agricultural means of production/work processes
Classification: ISIC rev.4 ecoinvent: 0161:Support activities for crop production
Synonyms: grain harvesting
Scenario: Business-as-Usual
System model: Allocation at the point of substitution
Generated by: Marília I. S. Folegatti Matsuura
Published in: Folegatti-Matsuura M. 2018
Database: ecoinvent
isCopyrightProtected: true

## General comment
This dataset represents an example of a typical combine harvesting.The functional unit (FU) is one ha harvested. The operation time is 0.25 h/FU and the fuel consumption is 26 liters per hour. This is a common operation in grain production in Brazil.

## Included activities start
From agricultural field foreseen to be processed.

## Included activities end
The dataset includes the diesel fuel consumption and the amount of agricultural machinery and of the shed attributed to harvesting. It was also taken into consideration the amount of emissions to the air from combustion and the emission to the soil from tyre abrasion during the work process. The following activities where considered part of the work process: preliminary work at the farm, such as attaching the adequate machine to the tractor; field work (for a parcel of land of 1 ha surface); and concluding work, like uncoupling the machine. The overlapping during the field work is considered. The dataset doesn't include the grain production, straw treatment, dust other than from combustion and noise.This activity ends with the delivery of harvesting by combined harvester.

## Geography
The inventory is modelled for agricultural processes in Brazil.

## Technology
Fuel consumption has been extrapolated to Brazil, but emissions per kg diesel and others inputs were taken from the original values.

## Time period
Most of the data used to modelling this activity were collected in the last few years (2012-2016).

## Reference product
- combine harvesting: 1 ha; By-product classification allocatable product; CPC 86119: Other support services to crop production
  production volume 5.99441e7 ha
    Area of arable land in Brazil, according to the Municipal Agricultural Production Data of the Brazilian Institute of Geography and Statistics (SIDRA - IBGE). See more in: http://www.sidra.ibge.gov.br/.
    Permanent crops, including sugarcane, are not accounted for.
    1 applications/year assumed for arable (own estimation).
  property price 54.5278 EUR2005
    Calculated based on inputs: The price of the product has been calculated as a sum of the values of the material and energy inputs for this product. This value is therefore a rough estimation. It may underestimate the real price since there are additional expenses when producing any product. These expences can include for example labour costs, treatment of waste materials and profit for the producer. Please consider carefully whether this level of data quality is acceptable for your application.
  properties: carbon allocation 0 kg, carbon content 0

## Inputs from technosphere
- diesel: 5.5 kg; name diesel_consumption; lognormal variance with pedigree 0.006, pedigree (1,4,3,5,1)
  Scaling to Brazil diesel consumption.
  properties: carbon content, fossil 0.865, dry mass 1 kg, heating value, net 42.8 MJ, wet mass 1 kg
  note on carbon content, fossil: C-content of diesel is 86.5% (ecoinvent v2.2 report 6_IV, Tab 3.14)
- harvester: 6.3 kg; lognormal variance with pedigree 0.006, pedigree (1,4,3,5,1)
  Proxy, based on 'Agricultural Field Work Processes' - pdf-document on the dedicated talk page of ecoinvent (www.ecoinvent.org/talk-pages). The same amount of machinery use as in the CA-QC dataset is used as a proxy.
- shed: 0.00858 m2; lognormal variance with pedigree 0.306, pedigree (1,4,3,5,1)
  (same comment as for harvester)

## Emissions to nature
- Ammonia [air, non-urban air or from high stacks]: 0.00011 kg; = 2,00E-05* diesel_consumption; source Nemecek, T. 2007; lognormal variance with pedigree 0.0621, pedigree (1,2,3,5,3)
  Emission from diesel combustion scaled from the CA-QC emission factor based on the relative diesel consumption.
- Benzene [air, non-urban air or from high stacks]: 4.015e-5 kg; = 7,30E-06* diesel_consumption; source Nemecek, T. 2007; lognormal variance with pedigree 0.0621, pedigree (1,2,3,5,3)
  (same comment as for Ammonia)
- Benzo(a)pyrene [air, non-urban air or from high stacks]: 1.6555e-7 kg; = 3,01E-08* diesel_consumption; source Nemecek, T. 2007; lognormal variance with pedigree 0.6621, pedigree (1,2,3,5,3)
  (same comment as for Ammonia)
- Cadmium II [air, non-urban air or from high stacks]: 5.5e-8 kg; = 1.00E-08* diesel_consumption; source Nemecek, T. 2007; lognormal variance with pedigree 0.6621, pedigree (1,2,3,5,3)
  (same comment as for Ammonia)
- Carbon dioxide, fossil [air, non-urban air or from high stacks]: 16.995 kg; = 3.09E+00* diesel_consumption; source Nemecek, T. 2007; lognormal variance with pedigree 0.0221, pedigree (1,2,3,5,3)
  (same comment as for Ammonia)
- Carbon monoxide, fossil [air, non-urban air or from high stacks]: 0.052855 kg; = 9.61E-03* diesel_consumption; lognormal variance with pedigree 0.656, pedigree (1,4,3,5,1)
  (same comment as for Ammonia)
- Chromium III [air, non-urban air or from high stacks]: 2.7555e-7 kg; = 5.01E-08* diesel_consumption; source Nemecek, T. 2007; lognormal variance with pedigree 0.6621, pedigree (1,2,3,5,3)
  (same comment as for Ammonia)
- Copper ion [air, non-urban air or from high stacks]: 9.35e-6 kg; = 1.70E-06* diesel_consumption; source Nemecek, T. 2007; lognormal variance with pedigree 0.6621, pedigree (1,2,3,5,3)
  (same comment as for Ammonia)
- Dinitrogen monoxide [air, non-urban air or from high stacks]: 0.00066 kg; = 1.20E-04* diesel_consumption; source Nemecek, T. 2007; lognormal variance with pedigree 0.0621, pedigree (1,2,3,5,3)
  (same comment as for Ammonia)
- Methane, fossil [air, non-urban air or from high stacks]: 0.0007095 kg; = 1.29E-04* diesel_consumption; source Nemecek, T. 2007; lognormal variance with pedigree 0.0621, pedigree (1,2,3,5,3)
  (same comment as for Ammonia)
- NMVOC, non-methane volatile organic compounds [air, non-urban air or from high stacks]: 0.023925 kg; = 4.35E-03* diesel_consumption; lognormal variance with pedigree 0.046, pedigree (1,4,3,5,1)
  (same comment as for Ammonia)
- Nickel II [air, non-urban air or from high stacks]: 3.8445e-7 kg; = 6.99E-08* diesel_consumption; source Nemecek, T. 2007; lognormal variance with pedigree 0.6621, pedigree (1,2,3,5,3)
  (same comment as for Ammonia)
- Nitrogen oxides [air, non-urban air or from high stacks]: 0.2805 kg; = 5.10E-02* diesel_consumption; lognormal variance with pedigree 0.046, pedigree (1,4,3,5,1)
  (same comment as for Ammonia)
- PAH, polycyclic aromatic hydrocarbons [air, non-urban air or from high stacks]: 1.8095e-5 kg; = 3.29E-06* diesel_consumption; source Nemecek, T. 2007; lognormal variance with pedigree 0.3221, pedigree (1,2,3,5,3)
  (same comment as for Ammonia)
- Particulate Matter, < 2.5 um [air, non-urban air or from high stacks]: 0.024585 kg; = 4.47E-03* diesel_consumption; lognormal variance with pedigree 0.3221, pedigree (1,2,3,5,3)
  (same comment as for Ammonia)
- Selenium IV [air, non-urban air or from high stacks]: 5.5e-8 kg; = 1,00E-08* diesel_consumption; source Nemecek, T. 2007; lognormal variance with pedigree 0.0621, pedigree (1,2,3,5,3)
  (same comment as for Ammonia)
- Sulfur dioxide [air, non-urban air or from high stacks]: 0.005555 kg; = 1.01E-03* diesel_consumption; source Nemecek, T. 2007; lognormal variance with pedigree 0.0221, pedigree (1,2,3,5,3)
  (same comment as for Ammonia)
- Zinc II [air, non-urban air or from high stacks]: 5.5e-6 kg; = 1.00E-06* diesel_consumption; source Nemecek, T. 2007; lognormal variance with pedigree 0.6621, pedigree (1,2,3,5,3)
  (same comment as for Ammonia)
- Cadmium II [soil, agricultural]: 8.82e-7 kg; lognormal variance with pedigree 0.046, pedigree (1,4,3,5,1)
  Proxy, based on 'Agricultural Field Work Processes' - pdf-document on the dedicated talk page of ecoinvent (www.ecoinvent.org/talk-pages). Emission to soil from tyre abrasion, not related to diesel combustion. The same emission factor as the CA-QC dataset is used as a proxy.
- Lead II [soil, agricultural]: 3.78e-6 kg; lognormal variance with pedigree 0.046, pedigree (1,4,3,5,1)
  (same comment as for Cadmium II)
- Zinc II [soil, agricultural]: 0.00238 kg; lognormal variance with pedigree 0.046, pedigree (1,4,3,5,1)
  (same comment as for Cadmium II)

## Sampling procedure
Emissions of CO, HC and NOx are expert estimations based on measurements for comparable activities (roling). The other emissions were calculated basing on literature data and the measured fuel consumption. The main source of data for diesel consumption are projects conducted by Embrapa Soja (CNPSO). Data are also provided by relevant experts related to agricultural sector in Brazil.

## Extrapolations
Dataset based on CA-QC dataset which was extrapolated from CH geography context with modification of exchanges. Processes are typical procedures for Switzerland around the year 2000, they are not statistical average processes. This dataset has been adapted only for diesel input representative of the Brazil context and for combustion emissions scaled from the difference in diesel consumption. The uncertainty has been adjusted accordingly.

## Review by Jens Lansche 2017-11-23
Based on an existing dataset. Diesel input and related combustion emissions adapted.
