# treatment of glass cullet, from fluorescent lamps treatment, 0% water, inert material landfill

Dataset: EcoSpold 2, unit process
Geography: GLO
Time period: 1995-01-01 to 2022-12-31
Technology level: current
Classification: ISIC rev.4 ecoinvent: 3821:Treatment and disposal of non-hazardous waste
Classification: EcoSpold01Categories: waste management/inert material landfill
Tags: Treatment
Scenario: Business-as-Usual
System model: Allocation at the point of substitution
Generated by: Tereza Levova
Published in: Doka G. 2007
Database: ecoinvent
isCopyrightProtected: true

## General comment
This is a proxy dataset based on treatment of waste glass, final disposal to inert material landfill.

## Included activities end
No direct emissions from inert material landfill (leachate) are inventoried as deemed negligible. Module contains only exchanges to process-specific burdens (energy, land use) and infrastructure.

## Geography
Specific to the technology encountered in Switzerland in 2000.

## Technology
landfill with renaturation after closure. 50% of the sites feature a base seal and leachate collection system.

## Reference product
- glass cullet, from fluorescent lamps treatment: -1 kg; By-product classification Waste; CPC 37111: Glass in the mass, in balls (except microspheres), rods or tubes, unworked; waste and scrap of glass
  production volume 1.068e8 kg
    Calculated based on literature values. The production volume (PV) of flurescent lamps is 1.2E+08 kg. While treating 1kg of used fluorescent lamp ("treatment of used fluorescent lamp") 0.89 kg of "glass cullet, from fluorescent lamps treatment" is produced as a by-product, i.e. the final PV of those glass cullets is (1.2E+08*0.89=) 1.068E+08 kg.
  property price 0 EUR2005
    Waste products are assigned a price of zero as they are assumed to require further treatment.
  properties: carbon allocation 0 kg, carbon content 0, carbon content, fossil 0, carbon content, non-fossil 0, dry mass 1 kg, water content 0, water in wet mass 0 kg, wet mass 1 kg

## Inputs from technosphere
- inert material landfill: 1.48e-9 unit; lognormal variance with pedigree 0.042, pedigree (1,1,5,5,1)
  landfill infrastructure per kg waste, uncerteinty heeded in module.
  EcoSpold01Location=CH
- process-specific burdens, inert material landfill: 0.991583, 0.00841689 kg (2 suppliers, which the file names only by identifier); sum of these 1 kg; lognormal variance with pedigree 0.042, pedigree (1,1,5,5,1)
  EcoSpold01Location=CH
  process-specific burdens per kg waste, uncerteinty heeded in module.

## Review by Bo Weidema 2012-05-04
Passed
