# treatment of wastewater from particle board production, wastewater treatment

Dataset: EcoSpold 2, unit process
Geography: RoW
Time period: 2010-01-01 to 2022-12-31
Technology level: current
Classification: ISIC rev.4 ecoinvent: 3700:Sewerage
Scenario: Business-as-Usual
System model: Allocation at the point of substitution
Generated by: Nikolia Stoikou
Database: ecoinvent
isCopyrightProtected: true

## General comment
This dataset represents the treatment of a wastewater, generated from an ordinary transforming activity. Purification in wastewater treatment of 'wastewater from particle board production'. Recommended use of this dataset: to be used for wastewaters, generated from ordinary transforming activities, of equal or similar composition. The wastewater has a content of TOC: 0.0015871 kg/m3, COD: 0.00619 kg/m3 and BOD: 0.00299 kg/m3. TOC is equal to C present in the wastewater, COD is calculated as TOC/0.2565 and BOD is calculated as COD/0.53034. Detailed elemental composition can be found in the properties of the wastewater treated. Share of biogenic carbon in the sludge: 100%.

## Included activities start
The activity starts with the wastewater being available at the gate of the treatment facility. Collection and transportation of the wastewater to the treatment plant is not included.

## Included activities end
The activity ends with the wastewater being treated and waste-specific emissions released to the environment. Expenditures from treatment of wastewater in waste treatment plant are included as well as relevant infrastructure of the plant. Emissions from any sludge digestion, biogas generation and utilization (heeding specific wastewater composition) are also included. Waste-specific direct emissions of untreated wastewater and required territory-specific infrastructure for sewers are not contained within this dataset but instead in the regional market datasets for this wastewater.

## Geography
The site has mean annual temperature (MAT) of 16.743579766537 degC, mean annual precipitation (MAP) of 1250.84108527132 mm/year, mean annual actual evaporation (EAT) of 460.58904958214 mm/year. In the WWT plant, 0% of its water input are lost due to evaporation from pools, 0.0000781% of water is *gained* from organic mass degradation, and 0.0000358% is removed off site via sludge disposal. (References: UN data, 2020. Precipitation, Environment Statistics Database, United Nations Statistics Division Available at: http://data.un.org/Data.aspx?q=precipitation&d=ENV&f=variableID%3a6; World Bank, 2022. Surface area (sq.km), World Bank Group Available at: https://data.worldbank.org/indicator/AG.SRF.TOTL.K2; Doka G.,2021. A model for composition-specific life cycle inventories of regionalised wastewater fates, Zurich, Switzerland. http://www.doka.ch/publications.htm)

## Technology
This is an inventory for the disposal of a selected wastewater in Global. The reference unit is 1 m3 wastewater input. This activity represents the treatment of a specific wastewater in a WWT plant (while direct emissions and sewering are heeded in the upstream market dataset for this wastewater). The size of the treatment plant infrastructure is for a supranational region average territory situation. The assumed size of the WWTP treats 82.2 Mio m3 per year. The mixture of WWTP with one, two, or three stages is 8.2%-41.2%-50.6%. The actual, waste-specific oxygen requirement in the biological stages is 0.0006671168 kg O. The digestion process produces 0.15218075 litres of biogas with an energy content of 0.003522938MJ. 60.5% of the biogas is utilized for energy. The remainder is flared. The gross electric efficiency is 26.564%. The gross thermal efficiency is 47.853%. After digestion, the remaining total sludge mass (dry matter) is 0.001016kg DM.

## Reference product
- iron scrap, sorted, pressed: 1 kg; By-product classification Recyclable; CPC 39310: Slag, dross, scalings and other waste from the manufacture of iron or steel; lognormal variance with pedigree 0.3611, pedigree (1,1,1,1,1)
  scrap output from used infrastructure for wastewater treatment plant.
  Uncertainty: Uncertainty calculated from wastewater technosphere fate uncertainty and treatment infrastructure uncertainty.
  production volume 1107.33 kg
    Calculated in proportion to wastewater reference product.
  property price 0.175 EUR2005
    Temporary price data. Calculated as 90% of purchasers price based on: 2005 import and export prices (total trades (USD) divided by total weight (kg) in biggest economies of the world: EU27, USA, Brasil, China, India, Japan and Russia) from UN Commodity Trade Statistics Database (http://data.un.org/Explorer.aspxDatabase [Accessed 2011.06.20]). Commodity: Waste or scrap, of cast iron
  properties: carbon allocation 0 kg, carbon content 0, carbon content, fossil 0, carbon content, non-fossil 0, dry mass 1 kg, water content 0, water in wet mass 0 kg, wet mass 1 kg

## Inputs from technosphere
- agricultural trailer: 7.46472e-6 kg
- aluminium sulfate, powder: 0.000198431 kg
- aluminium, cast alloy: 0.000177981 kg
- ammonium sulfate: 6.90069e-7, 2.25586e-6 kg (2 suppliers, which the file names only by identifier); sum of these 2.94593e-6 kg
- bark chips, wet, measured as dry mass: 6.7622e-7, 3.25843e-5, 7.62939e-6, 1.04663e-7 kg (4 suppliers, which the file names only by identifier); sum of these 4.09946e-5 kg
- biowaste: -0.000610263 kg
- building, hall: 1.0495e-8 m2
- cast iron: 0.000177981 kg
- chemical, organic: 8.87151e-5 kg
- chromium steel pipe: 1.57899e-6 kg
- corrugated board box: 1.03383e-5, 2.39964e-5, 9.38842e-6, 3.85104e-7 kg (4 suppliers, which the file names only by identifier); sum of these 4.41082e-5 kg
- diesel: 2.78352e-7, 2.81813e-8, 5.81644e-7, 1.94974e-8, 2.74859e-6, 6.63034e-9 kg (6 suppliers, which the file names only by identifier); sum of these 3.6629e-6 kg
- diesel, burned in agricultural machinery: 0.00476903 MJ
- diesel, burned in building machine: 0.00368916 MJ
- diesel, burned in diesel-electric generating set, 18.5kW: 9.92087e-5 MJ
- dust collector, electrostatic precipitator, for industrial use: 2.81277e-10 unit
- electricity, medium voltage: 0.00146718, 0.00309255, 1.05668e-8, 0.00094684, 1.25351e-7, 6.54208e-7, 1.45379e-7, 7.14953e-8, 1.13848e-7, 1.41247e-7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 kWh (32 suppliers, which the file names only by identifier); sum of these 0.0150829 kWh
- extrusion of plastic sheets and thermoforming, inline: 6.50016e-5 kg
- furnace, wood chips, softwood storage area, 1000kW: 1.39544e-9 unit
- furnace, wood chips, with silo, 300kW: 6.14615e-12 unit
- furnace, wood chips, with silo, 5000kW: 5.89964e-9 unit
- glued laminated timber, average glue mix: 2.86887e-7, 6.22884e-7 m3 (2 suppliers, which the file names only by identifier); sum of these 9.09771e-7 m3
- hazardous waste, for incineration: -1.06244e-5 kg
- heat, district or industrial, natural gas: 0.00208237, 7.95506e-6, 0.0252177, 1.30722e-7 MJ (4 suppliers, which the file names only by identifier); sum of these 0.0273081 MJ
- heat, district or industrial, other than natural gas: 0.000115507, 0.000675775, 1.71964e-5, 0.0031658, 0.00285164, 3.13074e-7, 0.00161808, 0.000888424 MJ (8 suppliers, which the file names only by identifier); sum of these 0.00933273 MJ
- heavy fuel oil: 2.27496e-5, 1.91427e-7, 9.73181e-7, 2.45573e-7, 3.28736e-7, 4.68692e-6 kg (6 suppliers, which the file names only by identifier); sum of these 2.91754e-5 kg
- lubricating oil: 0.000116988, 1.78944e-5 kg (2 suppliers, which the file names only by identifier); sum of these 0.000134882 kg
- medium density fibreboard: 5.94894e-8, 3.80998e-7 m3 (2 suppliers, which the file names only by identifier); sum of these 4.40487e-7 m3
- melamine formaldehyde resin: 0.00125097 kg
- melamine urea formaldehyde adhesive: 1.67237e-6 kg
- metal working, average for chromium steel product manufacturing: 1.57899e-6 kg
- metal working, average for steel product manufacturing: 0.000473628 kg
- methylene diphenyl diisocyanate: 0.000408533 kg
- municipal solid waste: -1.32128e-9, -4.75776e-10, -9.34462e-7, -3.3293e-10 kg (4 suppliers, which the file names only by identifier); sum of these -9.36592e-7 kg
- paraffin: 0.000395548 kg
- particleboard, uncoated: 1.1967e-6, 5.78129e-7 m3 (2 suppliers, which the file names only by identifier); sum of these 1.77482e-6 m3
- phenolic resin: 0.000153517 kg
- plywood: 2.2649e-8, 4.80552e-7 m3 (2 suppliers, which the file names only by identifier); sum of these 5.03201e-7 m3
- polyethylene terephthalate, granulate, amorphous: 1.39289e-5 kg
- polypropylene, granulate: 5.10727e-5 kg
- polyurethane adhesive: 1.49938e-6 kg
- pulpwood, hardwood, measured as solid wood under bark: 3.06094e-7 m3
- pulpwood, softwood, measured as solid wood under bark: 3.30798e-5 m3
- residual softwood, wet: 1.0516e-7 m3
- sawdust, wet, measured as dry mass: 6.16276e-5, 0.0030214 kg (2 suppliers, which the file names only by identifier); sum of these 0.00308303 kg
- sawlog and veneer log, eucalyptus ssp., measured as solid wood under bark: 2.75975e-6, 1.93666e-8 m3 (2 suppliers, which the file names only by identifier); sum of these 2.77912e-6 m3
- sawlog and veneer log, softwood, measured as solid wood under bark: 8.27378e-9, 1.72837e-6, 1.95768e-8 m3 (3 suppliers, which the file names only by identifier); sum of these 1.75622e-6 m3
- sawnwood, board, softwood, raw, dried (u=10%): 4.00984e-7 m3
- sawnwood, hardwood, dried (u=10%), planed: 2.54017e-8, 1.03134e-8 m3 (2 suppliers, which the file names only by identifier); sum of these 3.57152e-8 m3
- scrap aluminium: -5.64568e-5, -2.64882e-6, -0.000118875 kg (3 suppliers, which the file names only by identifier); sum of these -0.000177981 kg
- scrap steel: -8.15505e-8, -0.000200487, -6.43668e-5 kg (3 suppliers, which the file names only by identifier); sum of these -0.000264935 kg
- shed, large, wood, non-insulated, fire-unprotected: 2.82395e-8 m2
- slab and siding, softwood, wet, measured as dry mass: 0.00326109, 1.9084e-5, 0.0126452, 2.45119e-7 kg (4 suppliers, which the file names only by identifier); sum of these 0.0159256 kg
- steel in car shredder residue: -6.62497e-5 kg
- steel, low-alloyed: 6.62497e-5 kg
- steel, low-alloyed, hot rolled: 0.000652198 kg
- synthetic rubber: 2.01107e-5 kg
- tap water: 4.2037e-5, 0.0177949, 0.00175184, 6.94731e-5, 0.000129633, 0.0200472, 4.55736e-5, 0.000349223 kg (8 suppliers, which the file names only by identifier); sum of these 0.0402299 kg
- tractor, 4-wheel, agricultural: 9.05492e-6 kg
- urea: 2.67908e-5, 3.38828e-6, 2.28774e-5 kg (3 suppliers, which the file names only by identifier); sum of these 5.30565e-5 kg
- urea formaldehyde resin: 0.00585409, 2.65683e-5 kg (2 suppliers, which the file names only by identifier); sum of these 0.00588065 kg
- used intermodal shipping container, 20-foot: -6.55024e-8 unit
- used intermodal shipping container, 40-foot: -3.14382e-8 unit
- used intermodal shipping container, 40-foot, high-cube: -4.31118e-8 unit
- used intermodal shipping container, 45-foot, high-cube: -6.46541e-9 unit
- waste mineral oil: -6.28721e-7, -6.66804e-5, -2.53967e-5 kg (3 suppliers, which the file names only by identifier); sum of these -9.27058e-5 kg
- waste paperboard: -2.9408e-7, -1.91803e-7, -3.5775e-5, -1.92581e-6, -4.72953e-6, -1.03616e-7, -1.06263e-6, -2.57146e-8 kg (8 suppliers, which the file names only by identifier); sum of these -4.41082e-5 kg
- waste polyethylene/polypropylene product: -4.6222e-5, -1.82325e-5, -5.47111e-7 kg (3 suppliers, which the file names only by identifier); sum of these -6.50016e-5 kg
- waste rubber, unspecified: -3.95977e-7, -9.43256e-6, -9.45817e-6 kg (3 suppliers, which the file names only by identifier); sum of these -1.92867e-5 kg
- waste wood, post-consumer: -0.00157836, -0.000953941 kg (2 suppliers, which the file names only by identifier); sum of these -0.0025323 kg
- waste wood, untreated: -1.21521e-7, -1.115e-6, -1.66213e-6, -0.000177598, -7.05287e-7, -2.11262e-5, -4.66843e-6 kg (7 suppliers, which the file names only by identifier); sum of these -0.000206996 kg
- wastewater from particle board production: -2.50835e-9, -9.10661e-6 m3 (2 suppliers, which the file names only by identifier); sum of these -9.10912e-6 m3
- wastewater, unpolluted: -7.2794e-8, -1.50529e-5 m3 (2 suppliers, which the file names only by identifier); sum of these -1.51257e-5 m3
- welding, arc, steel: 8.65579e-6 m
- wood ash mixture, pure: -5.49738e-9, -2.67428e-7, -0.000102245 kg (3 suppliers, which the file names only by identifier); sum of these -0.000102518 kg
- wood chips, dry, measured as dry mass: 0.0254521 kg
- wood chips, from post-consumer wood, measured as dry mass: 0.0231037 kg
- wood chips, wet, measured as dry mass: 7.25218e-6, 0.00320076 kg (2 suppliers, which the file names only by identifier); sum of these 0.00320801 kg
- wood preservation, pressure vessel, creosote, outdoor use, ground contact: 0.00014748 kg
- wooden board factory, organic bonded boards: 5.0238e-12, 7.12901e-14 unit (2 suppliers, which the file names only by identifier); sum of these 5.09509e-12 unit
- zinc coat, pieces: 4.89734e-5 m2

## Inputs from nature
- Water, cooling, unspecified natural origin [natural resource, in water]: 8.0567e-6 m3
- Water, well, in ground [natural resource, in water]: 2.49941e-7 m3

## Emissions to nature
- Acetaldehyde [air, unspecified]: 1.4043e-10 kg
- Acetaldehyde [air, urban air close to ground]: 5.5761e-8 kg
- Acetone [air, unspecified]: 7.10014e-8 kg
- Ammonia [air, unspecified]: 3.98267e-9 kg
- Ammonia [air, urban air close to ground]: 4.63772e-7 kg
- Arsenic ion [air, unspecified]: 2.30212e-12 kg
- Arsenic ion [air, urban air close to ground]: 2.68076e-10 kg
- Benzene [air, unspecified]: 2.09493e-9 kg
- Benzene [air, urban air close to ground]: 2.43949e-7 kg
- Benzene, ethyl- [air, unspecified]: 6.90637e-11 kg
- Benzene, ethyl- [air, urban air close to ground]: 8.04229e-9 kg
- Benzene, hexachloro- [air, unspecified]: 1.65753e-17 kg
- Benzene, hexachloro- [air, urban air close to ground]: 1.93015e-15 kg
- Benzo(a)pyrene [air, unspecified]: 1.15106e-12 kg
- Benzo(a)pyrene [air, urban air close to ground]: 1.34038e-10 kg
- Bromine [air, unspecified]: 1.38127e-10 kg
- Bromine [air, urban air close to ground]: 1.60846e-8 kg
- Cadmium II [air, unspecified]: 1.61149e-12 kg
- Cadmium II [air, urban air close to ground]: 1.87653e-10 kg
- Calcium [air, unspecified]: 1.34674e-8 kg
- Calcium [air, urban air close to ground]: 1.56825e-6 kg
- Carbon dioxide, fossil [air, unspecified]: 0.000102408 kg
- Carbon dioxide, non-fossil [air, unspecified]: 0.000546493 kg
- Carbon dioxide, non-fossil [air, urban air close to ground]: 0.0286842 kg
- Carbon monoxide, fossil [air, unspecified]: 2.05655e-8 kg
- Carbon monoxide, non-fossil [air, unspecified]: 4.464e-6 kg
- Carbon monoxide, non-fossil [air, urban air close to ground]: 5.36152e-5 kg
- Chlorine [air, unspecified]: 4.14382e-10 kg
- Chlorine [air, urban air close to ground]: 4.82537e-8 kg
- Chromium III [air, unspecified]: 9.11641e-12 kg
- Chromium III [air, urban air close to ground]: 1.06158e-9 kg
- Chromium VI [air, unspecified]: 9.2085e-14 kg
- Chromium VI [air, urban air close to ground]: 1.0723e-11 kg
- Copper ion [air, unspecified]: 5.06467e-11 kg
- Copper ion [air, urban air close to ground]: 5.89768e-9 kg
- Dinitrogen monoxide [air, unspecified]: 5.36584e-9 kg
- Dinitrogen monoxide [air, urban air close to ground]: 6.16575e-7 kg
- Dioxins, measured as 2,3,7,8-tetrachlorodibenzo-p-dioxin [air, unspecified]: 7.13659e-17 kg
- Dioxins, measured as 2,3,7,8-tetrachlorodibenzo-p-dioxin [air, urban air close to ground]: 8.31036e-15 kg
- Fluorine [air, unspecified]: 1.15106e-10 kg
- Fluorine [air, urban air close to ground]: 1.34038e-8 kg
- Formaldehyde [air, unspecified]: 3.88276e-7 kg
- Formaldehyde [air, urban air close to ground]: 1.17072e-5 kg
- Heat, waste [air, non-urban air or from high stacks]: 1.99448e-5 MJ
- Hydrocarbons, aliphatic, alkanes, unspecified [air, unspecified]: 5.58746e-9 kg
- Hydrocarbons, aliphatic, alkanes, unspecified [air, urban air close to ground]: 2.43949e-7 kg
- Hydrocarbons, aliphatic, unsaturated [air, unspecified]: 7.13659e-9 kg
- Hydrocarbons, aliphatic, unsaturated [air, urban air close to ground]: 8.31036e-7 kg
- Lead II [air, unspecified]: 5.75531e-11 kg
- Lead II [air, urban air close to ground]: 6.7019e-9 kg
- Magnesium [air, unspecified]: 8.28765e-10 kg
- Magnesium [air, urban air close to ground]: 9.65074e-8 kg
- Manganese II [air, unspecified]: 3.91361e-10 kg
- Manganese II [air, urban air close to ground]: 4.5573e-8 kg
- Mercury II [air, unspecified]: 6.90637e-13 kg
- Mercury II [air, urban air close to ground]: 8.04229e-11 kg
- Methane, fossil [air, urban air close to ground]: 3.59901e-9 kg
- Methane, non-fossil [air, unspecified]: 4.51745e-9 kg
- Methane, non-fossil [air, urban air close to ground]: 4.02114e-7 kg
- Methanol [air, non-urban air or from high stacks]: 2.24566e-6 kg
- NMVOC, non-methane volatile organic compounds [air, unspecified]: 7.75952e-7 kg
- NMVOC, non-methane volatile organic compounds [air, urban air close to ground]: 5.15561e-5 kg
- Nickel II [air, unspecified]: 1.38127e-11 kg
- Nickel II [air, urban air close to ground]: 1.60846e-9 kg
- Nitrogen oxides [air, unspecified]: 8.8534e-7 kg
- Nitrogen oxides [air, urban air close to ground]: 6.03171e-5 kg
- PAH, polycyclic aromatic hydrocarbons [air, unspecified]: 2.55536e-11 kg
- PAH, polycyclic aromatic hydrocarbons [air, urban air close to ground]: 2.97565e-9 kg
- Particulate Matter, < 2.5 um [air, unspecified]: 1.23204e-7 kg
- Particulate Matter, < 2.5 um [air, urban air close to ground]: 6.7019e-6 kg
- Particulate Matter, > 10 um [air, unspecified]: 1.00792e-5 kg
- Particulate Matter, > 2.5 um and < 10um [air, unspecified]: 2.02295e-7 kg
- Phenol, pentachloro- [air, unspecified]: 1.86472e-14 kg
- Phenol, pentachloro- [air, urban air close to ground]: 2.17142e-12 kg
- Phosphorus [air, unspecified]: 6.90637e-10 kg
- Phosphorus [air, urban air close to ground]: 8.04229e-8 kg
- Potassium I [air, unspecified]: 5.38697e-8 kg
- Potassium I [air, urban air close to ground]: 6.27298e-6 kg
- Sodium [air, unspecified]: 2.99276e-9 kg
- Sodium [air, urban air close to ground]: 3.48499e-7 kg
- Sulfur dioxide [air, unspecified]: 5.75531e-9 kg
- Sulfur dioxide [air, urban air close to ground]: 3.45995e-6 kg
- Sulfur trioxide [air, unspecified]: 3.6416e-8 kg
- Toluene [air, unspecified]: 6.90637e-10 kg
- Toluene [air, urban air close to ground]: 8.04229e-8 kg
- Water [air, unspecified]: 3.58704e-6 m3
- Zinc II [air, unspecified]: 6.90637e-10 kg
- Zinc II [air, urban air close to ground]: 8.04229e-8 kg
- m-Xylene [air, unspecified]: 2.76255e-10 kg
- m-Xylene [air, urban air close to ground]: 3.21691e-8 kg
- Oils, unspecified [soil, industrial]: 3.38605e-8 kg
- Oils, unspecified [soil, unspecified]: 1.02803e-5 kg
- Formaldehyde [water, unspecified]: 1.5546e-10 kg
- Suspended solids, unspecified [water, unspecified]: 5.1962e-8 kg
- Water [water, unspecified]: 1.05138e-7 m3
