# treatment of sewage sludge, 70% water, WWT, WW from CRT production, municipal incineration FAE

Dataset: EcoSpold 2, unit process
Geography: CH
Time period: 2006-01-01 to 2022-12-31
Technology level: current
Classification: ISIC rev.4 ecoinvent: 3821:Treatment and disposal of non-hazardous waste
Scenario: Business-as-Usual
System model: Allocation at the point of substitution
Generated by: Nikolia Stoikou
Database: ecoinvent
isCopyrightProtected: true

## General comment
The process represents the treatment of a waste (sewage sludge) that is exclusively produced from another waste treatment. Municipal incineration is the controlled combustion of a waste. Sewage sludge is generated in the wastewater treatment of 'wastewater from CRT production'. Recommended use of this dataset: to be used within the specific chain of treatments for 'wastewater from CRT production'. Share of biogenic carbon in the sludge: 0%. "CRT" stands for "Cathode-ray tube".

## Included activities start
The activity starts with the waste being available at the gate of the treatment facility. Collection and transportation of the waste to the treatment plant is not included.

## Included activities end
The activity ends with the waste being treated and waste-specific emissions from the incineration process are released to the environment (air and water).

## Geography
Modelling parameters affecting the treatment technology are specific to this geography and to the technology mix encountered in Switzerland in 2012.

## Technology
The waste is treated in the incineration plant with flue gas cleaning. Incineration is the controlled combustion of a waste. Auxiliary material consumption for this step of air pollution control (APC) are included in the process. Infrastructure is also included in the process. Air polution control includes, electrostatic precipitator for fly ash (ESP), wet flue gas scrubber and 25% SNCR , 42.77% SCR-high dust , 32.68% SCR-low dust -DeNOx facilities and 0% without DeNOx (weighted according to mass of burnt waste). Efficiency of iron scrap separation from slag : 58%. Efficiency of aluminium scrap separation from slag : 31%. Efficiency of copper scrap separation from slag : 31%. The technology mix for this dataset includes a filter ash treatment (FLUWA) of a share of 46.22%. Gross electric efficiency technology mix 15.84% and Gross thermal efficiency technology mix 28.51%

## Reference product
- heat, for reuse in municipal waste incineration only: 1 MJ; By-product classification allocatable product; CPC 17300: Steam and hot water; lognormal variance with pedigree 0.061212, pedigree (1,1,1,1,1)
  net useful heat generated from this waste and used in internal MSWI plant energy redistribution.
  Uncertainty: uncertainty is calculated from uncertainties in waste composition and uncertainties in energy efficiency and the uncertainty in internal energy demand
  production volume 1.08726e-5 MJ
    Calculated from the production volume of the reference product in proportion to the respective output amounts.
  property price 0.0106 EUR2005
    Average European district heat price from Ecoheatcool and Euroheat 2005-2006, Ecoheat Work package 1: The European heat market. Final report. 10.6 EUR/GJ i s the price of district heat. http://www.solarthermalworld.org/files/Ecoheatcool%20WP1%20Web.pdf?download
  properties: carbon allocation 0 kg, carbon content 0

## Inputs from technosphere
- acetone, liquid: 6.19089e-9, 2.00172e-8 kg (2 suppliers, which the file names only by identifier); sum of these 2.62081e-8 kg
- acrylic dispersion, with water, in 58% solution state: 1.31341e-7, 6.2349e-7 kg (2 suppliers, which the file names only by identifier); sum of these 7.54831e-7 kg
- ammonia, anhydrous, liquid: 4.7781e-10, 5.00796e-11, 1.05745e-9, 4.87693e-10, 1.84052e-9, 2.46141e-10, 2.23875e-10, 5.29622e-9, 1.58215e-10 kg (9 suppliers, which the file names only by identifier); sum of these 9.838e-9 kg
- ammonium carbonate: 2.6461e-7, 1.3068e-7 kg (2 suppliers, which the file names only by identifier); sum of these 3.95289e-7 kg
- blast furnace sludge: -1.16787e-7, -6.83077e-8, -7.68968e-7, -1.73535e-8 kg (4 suppliers, which the file names only by identifier); sum of these -9.71415e-7 kg
- boric acid, anhydrous, powder: 3.91061e-7 kg
- calcium chloride: 2.35243e-6, 8.14728e-6 kg (2 suppliers, which the file names only by identifier); sum of these 1.04997e-5 kg
- carbon black: 1.7031e-6 kg
- chemical, inorganic: 1.71884e-6 kg
- chemical, organic: 9.95389e-6 kg
- chlorine, liquid: 2.77648e-6, 5.554e-7 kg (2 suppliers, which the file names only by identifier); sum of these 3.33188e-6 kg
- electric arc furnace slag: -5.49253e-9, -2.33578e-7, -3.64043e-8 kg (3 suppliers, which the file names only by identifier); sum of these -2.75475e-7 kg
- electricity, medium voltage: 0.0007326 kWh
- electron gun, for cathode ray tube display: 8.35031e-6 kg
- frit, for cathode ray tube display: 5.51445e-6 kg
- funnel glass, for cathode ray tube display: 0.000221901 kg
- heat, district or industrial, natural gas: 0.0043991 MJ
- heat, district or industrial, other than natural gas: 0.0129608 MJ
- hydrochloric acid, without water, in 30% solution state: 6.62571e-7, 2.9669e-6 kg (2 suppliers, which the file names only by identifier); sum of these 3.62947e-6 kg
- hydrogen peroxide, without water, in 50% solution state: 3.64674e-6, 7.68199e-7 kg (2 suppliers, which the file names only by identifier); sum of these 4.41494e-6 kg
- iron (III) chloride, without water, in 40% solution state: 1.13268e-5 kg
- mischmetal: 4.74623e-7 kg
- nickel, class 1: 8.11544e-6 kg
- nitrogen, liquid: 2.96452e-6, 8.13742e-7 kg (2 suppliers, which the file names only by identifier); sum of these 3.77827e-6 kg
- oxygen, liquid: 1.34754e-7, 4.91106e-7 kg (2 suppliers, which the file names only by identifier); sum of these 6.2586e-7 kg
- panel glass, for cathode ray tube display: 0.000585017 kg
- printed wiring board mounting facility: 1.84004e-10 unit
- quicklime, milled, loose: 6.53689e-8, 7.82193e-6 kg (2 suppliers, which the file names only by identifier); sum of these 7.8873e-6 kg
- sheet rolling, steel: 0.000163861 kg
- sodium hydroxide, without water, in 50% solution state: 4.79683e-6 kg
- sodium hypochlorite, without water, in 15% solution state: 1.33068e-9, 6.31689e-9 kg (2 suppliers, which the file names only by identifier); sum of these 7.64756e-9 kg
- spent solvent mixture: -2.18402e-8, -1.99932e-10, -8.53371e-9 kg (3 suppliers, which the file names only by identifier); sum of these -3.05738e-8 kg
- steel, chromium steel 18/8, hot rolled: 0.000141373 kg
- steel, unalloyed: 1.43921e-5 kg
- sulfuric acid: 9.01436e-6, 1.17927e-6 kg (2 suppliers, which the file names only by identifier); sum of these 1.01936e-5 kg
- toluene, liquid: 3.50159e-7, 4.66878e-8 kg (2 suppliers, which the file names only by identifier); sum of these 3.96846e-7 kg
- waste frit from cathode ray tube production: -2.49405e-7 kg
- waste mineral oil: -1.43263e-9, -1.51523e-7, -5.78698e-8 kg (3 suppliers, which the file names only by identifier); sum of these -2.10826e-7 kg
- waste plastic, mixture: -2.76382e-7, -1.39661e-9, -3.0814e-9, -2.39536e-7, -1.93483e-6, -1.84668e-8, -7.24297e-9, -7.62744e-9 kg (8 suppliers, which the file names only by identifier); sum of these -2.48856e-6 kg
- waste wood, untreated: -2.25204e-10, -2.06634e-9, -3.08029e-9, -3.29127e-7, -1.30705e-9, -3.91515e-8, -8.65162e-9, -2.48081e-8 kg (8 suppliers, which the file names only by identifier); sum of these -4.08417e-7 kg
- waste, from silicon wafer production, inorganic: -2.36454e-8 kg
- wastewater from cathode ray tube production: -4.32784e-6, -2.09289e-8 m3 (2 suppliers, which the file names only by identifier); sum of these -4.34877e-6 m3
- xylene: 3.36157e-8, 6.06891e-9 kg (2 suppliers, which the file names only by identifier); sum of these 3.96846e-8 kg
- zinc sulfide: 8.42471e-7 kg

## Inputs from nature
- Water, unspecified natural origin [natural resource, in water]: 4.90175e-5 m3

## Emissions to nature
- Carbon monoxide, fossil [air, urban air close to ground]: 1.4055e-6 kg
- Dimethylamine [air, urban air close to ground]: 2.88541e-9 kg
- NMVOC, non-methane volatile organic compounds [air, urban air close to ground]: 1.31456e-8 kg
- Nitrogen oxides [air, urban air close to ground]: 1.79404e-7 kg
- Sulfur dioxide [air, urban air close to ground]: 8.23452e-7 kg
- Toluene [air, urban air close to ground]: 3.17477e-7 kg
- Water [air, unspecified]: 2.99007e-6 m3
- Xylene [air, urban air close to ground]: 3.17477e-8 kg
- BOD5, Biological Oxygen Demand [water, surface water]: 5.28303e-7 kg
- COD, Chemical Oxygen Demand [water, surface water]: 5.96924e-7 kg
- Chromium III [water, surface water]: 8.43294e-10 kg
- Copper ion [water, surface water]: 1.48813e-10 kg
- Cyanide [water, surface water]: 5.01021e-11 kg
- DOC, Dissolved Organic Carbon [water, surface water]: 2.21083e-7 kg
- Fluoride [water, surface water]: 2.85232e-7 kg
- Iron ion [water, surface water]: 1.36419e-8 kg
- Lead II [water, surface water]: 2.48856e-10 kg
- Manganese II [water, surface water]: 2.97635e-10 kg
- Molybdenum VI [water, surface water]: 9.92116e-12 kg
- Nickel II [water, surface water]: 6.55619e-9 kg
- Nitrogen [water, surface water]: 5.93615e-7 kg
- Oils, unspecified [water, surface water]: 1.99246e-8 kg
- Phosphate [water, surface water]: 6.69269e-11 kg
- Phosphorus [water, surface water]: 4.17511e-9 kg
- Suspended solids, unspecified [water, surface water]: 3.82789e-7 kg
- TOC, Total Organic Carbon [water, surface water]: 2.21083e-7 kg
- Water [water, unspecified]: 4.16787e-5 m3
- Zinc II [water, surface water]: 1.14923e-9 kg

## Extrapolations
Modelling parameters are based on an average municipal solid waste incineration plant in Switzerland for the year of 2010 (grate incinerators).
