# onshore natural gas field infrastructure production

Dataset: EcoSpold 2, unit process
Geography: GLO
Time period: 1989-01-01 to 2022-12-31
Technology level: current
Classification: ISIC rev.4 ecoinvent: 0620:Extraction of natural gas
Classification: EcoSpold01Categories: natural gas/production
Scenario: Business-as-Usual
System model: Allocation at the point of substitution
Generated by: Christoph Meili
Published in: Meili, C. 2022
Database: ecoinvent
isCopyrightProtected: true

## General comment
This activity represents the construction of an onshore production field for extraction of natural gas. Lifetime 20 years.
For onshore production, several hundred production sites (wells) are summarized to one production field. The inventory is estimated for a site of 7500m2, which is described in more detail in Schori & Frischknecht (2012) and Jungbluth (2007). Oil and gas processing are done centrally, which requires pipes and pumps.
Onshore production requires space for pumps, separators, tanks, pipes, energy generation (for internal electricity production) as well as cleaning processes (particularly wastewater treatment).
Meili et al. (2021, section 6.4) assume that the lifetime of the land use change is only 20 instead of the formerly estimated 30 (oil) or 50 (gas) years. This assumption is based on analysis done for horizontal wells in Oklahoma US.
Reference(s): C. Meili, N. Jungbluth, M. Bussa (2021) Life cycle inventories of crude oil and natural gas extraction. ESU-services Ltd. commissioned by the Federal Office for the Environment (FOEN) and the “Verband der Schweizerischen Gasindustrie (VSG), Schaffhausen, Switzerland, DOI: 10.13140/RG.2.2.29142.78409, http://esu-services.ch/data/public-lci-reports/

## Included activities start
This activity starts with the transformation of land (forest assumed).

## Included activities end
Materials for construction and energy use for construction. Land use and transformation. Drilling of the wells is not included and hence considered separately. Manufacturing of facilities partly not included.

## Geography
The production pro field comes from Dutch data, the material requirements from German data.

## Technology
Data assume 100 drilling holes pro field with a distance of 300m from a comb-like collecting pipe.

## Time period
Material requirements is 1989 data, average production of field 1992 data.

## Reference product
- onshore natural gas field infrastructure: 1 unit; By-product classification allocatable product; CPC 53262: Power plants
  EcoSpold01Location=GLO
  production volume 1 unit
    Unknown
    Dummy value to be replaced by measured, estimated or calculated value
  property price 916050 EUR2005
    Calculated based on inputs: The price of the product has been calculated as a sum of the values of the material and energy inputs for this product. This value is therefore a rough estimation. It may underestimate the real price since there are additional expenses when producing any product. These expences can include for example labour costs, treatment of waste materials and profit for the producer. Please consider carefully whether this level of data quality is acceptable for your application.
  properties: carbon allocation 0 kg, carbon content 0

## Inputs from technosphere
- diesel, burned in building machine: 1.5e6 MJ; lognormal variance with pedigree 0.0401, pedigree (4,4,3,3,3)
  Qualified estimates for NL gas field
  EcoSpold01Location=GLO
  Uncertainty: qualified estimates for NL gas field
  properties: heating value, net 1 MJ
- electricity, medium voltage: 825000 kWh; lognormal variance with pedigree 0.0401, pedigree (4,4,3,3,3)
  EcoSpold01Location=UCTE
  Qualified estimates for NL gas field
  Uncertainty: qualified estimates for NL gas field
- reinforcing steel: 1.5e6 kg; lognormal variance with pedigree 0.0401, pedigree (4,4,3,3,3)
  EcoSpold01Location=RER
  Qualified estimates for NL gas field
  Uncertainty: qualified estimates for NL gas field
  properties: carbon content, fossil 0.004, dry mass 1 kg, wet mass 1 kg

## Inputs from nature
- Occupation, industrial area [natural resource, land]: 150000 m2*year; = 7500*20; lognormal variance with pedigree 0.0641, pedigree (3,4,3,3,3)
  Lifetime of 20 years, and assuming 7500m2 per field (updated based on Meili et al. 2021 from 50 years, which was applied up to v3.8)
  Uncertainty: qualified estimates for NL gas field, 50 years occupation
- Transformation, from forest, unspecified [natural resource, land]: 7500 m2; lognormal variance with pedigree 0.1261, pedigree (3,4,3,3,1)
  Area according to Schori & Frischknecht (2012), in Meili et al. (2021).
  Uncertainty: Literature
- Transformation, to mineral extraction site [natural resource, land]: 7500 m2; lognormal variance with pedigree 0.1261, pedigree (3,4,3,3,1)
  (same comment as for Transformation, from forest, unspecified)

## Sampling procedure
Publication in environmental reports and other literature. The inventory is estimated for a field with 100 drilling sites and described in more detail in Schori & Frischknecht (2012) and Jungbluth (2007).

## Extrapolations
Applied to all onshore operations. Data vary considerable depending on infrastructure necessary to access the place of production. No data for Middle East. It is assumed that the lifetime of the land use change is only 20 instead of the formerly estimated 30 (oil) or 50 (gas) years. This assumption is based on analysis done for horizontal wells in Oklahoma US. Here, more than half of the production of oil and gas, which is projected for the total lifetime occurs during the first three years of operation. A lifetime of 20 years might be too low for exceptionally large oil fields, such as Rumaila in Iraq. Therefore, by using this estimate, the impact of land use might be slightly underestimated for the dataset for Iraq. However, for most of the globally accessible, smaller fields, this estimate seems appropriate. (Meili et al. 2021, section 6.4)
