# extrusion, plastic film

Dataset: EcoSpold 2, unit process
Geography: RER
Time period: 1993-01-01 to 2022-12-31
Technology level: current
Classification: EcoSpold01Categories: plastics/processing
Classification: ISIC rev.4 ecoinvent: 2220:Manufacture of plastics products
Tags: ConvertedDataset
Scenario: Business-as-Usual
System model: Allocation at the point of substitution
Generated by: Roland Hischier
Published in: Hischier R. 2007
Database: ecoinvent
isCopyrightProtected: true

## General comment
1 kg of this process equals 0.976 kg of extruded plastic film.
[This dataset was already contained in the ecoinvent database version 2. It was not individually updated during the transfer to ecoinvent version 3. Life Cycle Impact Assessment results may still have changed, as they are affected by changes in the supply chain, i.e. in other datasets. This dataset was generated following the ecoinvent quality guidelines for version 2. It may have been subject to central changes described in the ecoinvent version 3 change report (http://www.ecoinvent.org/database/ecoinvent-version-3/reports-of-changes/), and the results of the central updates were reviewed extensively. The changes added e.g. consistent water flows and other information throughout the database. The documentation of this dataset can be found in the ecoinvent reports of version 2, which are still available via the ecoinvent website. The change report linked above covers all central changes that were made during the conversion process.]

## Included activities end
This process contains the auxillaries and energy demand for the mentioned convertion process of plastics. The converted amount of plastics is NOT included into the dataset.

## Geography
information from different European and Swiss converting companies

## Technology
present technologies

## Time period
time to which data refer

## Parameters
- fraction, cooling water, cooling pond system, to air: 0.032 dimensionless; name fraction_CW_CP_to_air; lognormal variance with pedigree 0.0413, pedigree (2,3,1,3,1)
  Calculated based on literature value (Scown, C.D., 2011, Water Footprint of U.S. Transportation Fuels and supplying information of the article) (Vionnet, S., Quantis Water Database - Technical Report, 2012).
- fraction, cooling water, once-through system, to air: 0.004 dimensionless; name fraction_CW_OT_to_air; lognormal variance with pedigree 0.0413, pedigree (2,3,1,3,1)
  (same comment as for fraction, cooling water, cooling pond system, to air)
- fraction, cooling water, recirculating system, to air: 0.771 dimensionless; name fraction_CW_R_to_air; lognormal variance with pedigree 0.0413, pedigree (2,3,1,3,1)
  (same comment as for fraction, cooling water, cooling pond system, to air)
- fraction, cooling water, to air: 0.3875 dimensionless; name fraction_CW_to_air; = (0.5*fraction_CW_OT_to_air)+(0.5*fraction_CW_R_to_air); lognormal variance with pedigree 0.092025, pedigree (4,4,3,2,4)
  Calculated value based on literature value (see comments of the other parametres present in this dataset) and expert opinion. In the case when no industry/literature data are available about the type of cooling or directly fraction, cooling water, to air specific for the process a default assumption is applied. It is assumed that the once-through cooling system is used in 50% of all cases and recirculating system is used in another 50% of all cases.

## Reference product
- extrusion, plastic film: 1 kg; By-product classification allocatable product; CPC 89200: Moulding, pressing, stamping, extruding and similar plastic manufacturing services
  EcoSpold01Location=RER
  production volume 1.32237 kg
    This is a placeholder value that does not reflect real-world production volumes. This dataset does not currently require a real-world production volume to work in the database framework, and no actual data were collected yet. This has no negative effect on the results of the ecoinvent database. The placeholder value of this activity was scaled according to the nominal GDP of 2005 (source: United Nations, http://data.un.org/Glossary.aspx?q=GDP+%28current+US%24%29, accessed 20130726) to reflect an appropriate share of the global production volume, which is also a placeholder value.
  property price 0.153387 EUR2005
    Calculated based on inputs: The price of the product has been calculated as a sum of the values of the material and energy inputs for this product. This value is therefore a rough estimation. It may underestimate the real price since there are additional expenses when producing any product. These expences can include for example labour costs, treatment of waste materials and profit for the producer. Please consider carefully whether this level of data quality is acceptable for your application.
  properties: carbon allocation 0 kg, carbon content 0

## Inputs from technosphere
- EUR-flat pallet: 0.00142714 unit; lognormal variance with pedigree 0.0592, pedigree (2,3,5,1,3)
  EcoSpold01Location=RER
  Typical values, based on a European and a Swiss study
  Uncertainty: typical values, based on a European and a Swiss study
  properties: carbon content, fossil 0.0311351, carbon content, non-fossil 0.58833, dry mass 18.3333 kg, heating value, net 335.11 MJ, water content 0.2, wet mass 22 kg
  note on carbon content, fossil: C content in components of the pallet (ecoinvent v2.2 report 7_part XVIII)
- core board: 0.0072546 kg; lognormal variance with pedigree 0.0592, pedigree (2,3,5,1,3)
  (same comment as for EUR-flat pallet)
  properties: carbon content, non-fossil 0.430314, dry mass 0.945 kg, heating value, net 12.19 MJ, water content 0.0582011, wet mass 1 kg
  note on carbon content, non-fossil: Biogenic C content was calculated after biogenic C contents of chemicals used in the production of board (ecoinvent v2.2 report 11_III, part 13). The cellulose content in 1 kg of paper (on a wet mas basis) was estimated as (1-chemical content), C content of cellulose was considered 0.44 kgC/kg dry mass (ecoinvent v2.2 report, n 15a, pg 40)
- electricity, medium voltage: 0.654104 kWh; lognormal variance with pedigree 0.0592, pedigree (2,3,5,1,3)
  Typical values, based on a European and a Swiss study
  EcoSpold01Location=UCTE
  Uncertainty: typical values, based on a European and a Swiss study
- heat, district or industrial, natural gas: 0.595631 MJ; lognormal variance with pedigree 0.0592, pedigree (2,3,5,1,3)
  (same comment as for EUR-flat pallet)
  properties: heating value, net 1 MJ
- heat, district or industrial, other than natural gas: 0.207232 MJ; lognormal variance with pedigree 0.0592, pedigree (2,3,5,1,3)
  Typical values, based on a European and a Swiss study
  EcoSpold01Location=RER
  Uncertainty: typical values, based on a European and a Swiss study
  properties: heating value, net 1 MJ
- lubricating oil: 0.000104062 kg; lognormal variance with pedigree 0.0592, pedigree (2,3,5,1,3)
  (same comment as for EUR-flat pallet)
  properties: carbon content, fossil 0.75, dry mass 1 kg, heating value, net 40.2 MJ, wet mass 1 kg
  note on carbon content, fossil: Lubricating oil is produced from diesel. C-content/dry mass of fats and oils considered 75%, from: ecoinvent v2.2 report, n 15a, pg 40
  note on heating value, net: Literature value, Source: IPCC 2006, 2006 IPCC Guidelines for National Greenhouse Gas Inventories, Prepared by the National Greenhouse Gas Inventories Programme, Eggleston H.S., Buendia L., Miwa K., Ngara T. and Tanabe K. (eds). Published: IGES, Japan
- packaging box factory: 1.38749e-9 unit; lognormal variance with pedigree 0.448, pedigree (4,5,5,5,5)
  EcoSpold01Location=RER
  Estimation
  Uncertainty: estimation
- particleboard, uncoated: 2.13079e-5 m3; lognormal variance with pedigree 0.0592, pedigree (2,3,5,1,3)
  (same comment as for heat, district or industrial, other than natural gas)
  properties: carbon content, fossil 0.045339, carbon content, non-fossil 0.4416, dry mass 599.3 kg, heating value, net 8749.71 MJ, water content 0.0629067, wet mass 637 kg
- polyethylene, low density, granulate: 0.00213079 kg; lognormal variance with pedigree 0.0592, pedigree (2,3,5,1,3)
  (same comment as for EUR-flat pallet)
  properties: carbon content, fossil 0.857143, dry mass 1 kg, heating value, net 42.47 MJ, wet mass 1 kg
  note on carbon content, fossil: Polyethylene is formed out of a huge amount of ethylene monomers (C2H4) (ecoinvent v2.2 report 11_II). MW=28 g/mol
- polypropylene, granulate: 0.000676898 kg; lognormal variance with pedigree 0.0592, pedigree (2,3,5,1,3)
  (same comment as for heat, district or industrial, other than natural gas)
  properties: carbon content, fossil 0.857143, dry mass 1 kg, heating value, net 32.78 MJ, wet mass 1 kg
  note on carbon content, fossil: Polypropylene is formed by the polymerisation of propylene, C3H6 (ecoinvent v2.2 report 11_II)
  note on heating value, net: Value extracted from "treatment of waste polypropylene, open burning"
- polyvinylchloride, suspension polymerised: 4.8364e-5 kg; lognormal variance with pedigree 0.0592, pedigree (2,3,5,1,3)
  (same comment as for heat, district or industrial, other than natural gas)
  properties: carbon content, fossil 0.387097, dry mass 1 kg, heating value, net 21.5 MJ, wet mass 1 kg
  note on carbon content, fossil: Monomer is vynyl chloride, C2H3Cl (ecoinvent v2.2 report 11_II). MW=62 g/mol
- solid bleached and unbleached board carton: 0.00096728 kg; lognormal variance with pedigree 0.0592, pedigree (2,3,5,1,3)
  (same comment as for EUR-flat pallet)
  properties: carbon content, fossil 0.0190874, carbon content, non-fossil 0.327779, dry mass 0.945 kg, heating value, net 9.8 MJ, water content 0.0582011, wet mass 1 kg
- steam, in chemical industry: 0.0574818 kg; lognormal variance with pedigree 0.0592, pedigree (2,3,5,1,3)
  (same comment as for heat, district or industrial, other than natural gas)
  properties: wet mass 1 kg
- waste plastic, mixture: -0.0238847 kg; lognormal variance with pedigree 0.0194, pedigree (2,3,2,1,3)
  Typical values, based on a European and a Swiss study
  EcoSpold01Location=CH
  Uncertainty: typical values, based on a European and a Swiss study
  production volume
    Calculated from the production volume of extrusion, plastic film in proportion to the respective output amounts.
  properties: carbon content, fossil 0.747344, dry mass 0.847 kg, heating value, net 30.79 MJ, water content 0.180638, wet mass 1 kg
  note on carbon content, fossil: C content in 1 kg DM was calculated using data in Tab A.2, ecoinvent v2.2 report 13_I
  note on heating value, net: Value taken from the general comment of the treatment dataset.

## Inputs from nature
- Water, cooling, unspecified natural origin [natural resource, in water]: 0.0433096 m3; name water_cooling_UNO_input; lognormal variance with pedigree 0.0592, pedigree (2,3,5,1,3)
  Typical values, based on a European and a Swiss study
  Uncertainty: typical values, based on a European and a Swiss study

## Emissions to nature
- Water [air, unspecified]: 0.0167825 m3; name water_to_air_unspecified; = (water_cooling_UNO_input*fraction_CW_to_air); lognormal variance with pedigree 0.0807, pedigree (2,2,5,1,1)
  Calculated value based on literature values and expert opinion. See comments in the parametres' comment field.
  property fraction, origin: fresh water 0; name fraction_origin_fresh_water
  property fraction, origin: salt water 0; name fraction_origin_salt_water
  property fraction, origin: unspecified 1; name fraction_origin_unspecified
- Water [water, unspecified]: 0.0265271 m3; name water_to_water_unspecified; = water_cooling_UNO_input*(1-fraction_CW_to_air); lognormal variance with pedigree 0.0807, pedigree (2,2,5,1,1)
  (same comment as for Water)
  property carbon content, fossil 0; name C_content_fossil
  property carbon content, non-fossil 0; name C_content_non_fossil
  property fraction, origin: fresh water 0; name fraction_origin_fresh_water_Ww
  property fraction, origin: salt water 0; name fraction_origin_salt_water_Ww
  property fraction, origin: unspecified 1; name fraction_origin_unspecified_Ww
  property water in wet mass 1000 kg; name WWM

## Sampling procedure
company data

## Extrapolations
no extrapolation

## Review by Hans-Jörg Althaus 2005-07-19
Passed
