# transport, pipeline, long distance, natural gas

Dataset: EcoSpold 2, unit process
Geography: RU
Time period: 2001-01-01 to 2022-12-31
Technology level: current
Classification: ISIC rev.4 ecoinvent: 4930:Transport via pipeline
Classification: EcoSpold01Categories: natural gas/production
Scenario: Business-as-Usual
System model: Allocation at the point of substitution
Share of production covered: 100 %
Generated by: Mireille Faist Emmenegger
Published in: Faist Emmenegger, Mireille 2015
Database: ecoinvent
isCopyrightProtected: true

## General comment
This dataset describes the transport from the Russian Federation to importing countries in Europe. Leakages per 1'000 km are based on the national report for UNFCCC 2014.
[This dataset is meant to replace the following datasets:]

## Included activities end
This dataset describes the energy consumption and the emissions linked to the transport of 1 tkm Russian natural gas in an onshore pipeline.

## Geography
The data for energy requirements is based on German data. Leakages are based on the national inventory of GHG for UNFCCC and assumptions on the distance.

## Technology
Long-distance gas transport onshore with average compressor station.

## Time period
The data for emissions is from 2014, the data for energy requirements from 2001.

## Reference product
- transport, pipeline, long distance, natural gas: 1 metric ton*km; By-product classification allocatable product; CPC 65131: Transport services via pipeline of petroleum and natural gas
  EcoSpold01Location=RU
  production volume 7.7015e11 metric ton*km
    211 e9 Nm3 exported in 2013. Assumption: average 5000 km distance transported, density 0.73 kg/Nm3
  property price 0.106 EUR2005
    Same calculations in file R61. The variations is due to industry price per MJ, which has been updated to prices in EU27 in 2005 (http://epp.eurostat.ec.europa.eu/tgm/table.do?tab=table&init=1&language=en&pcode=ten00112&plugin=1).
  properties: carbon allocation 0 kg, carbon content 0

## Inputs from technosphere
- natural gas, burned in gas turbine: 1.17025 MJ; = 1.18*(36.0/36.3)
  Based on information from industry experts (German and Swiss data from 2001, ecoinvent report version 2). Value from tab. 7.14 in Faist Emmengger et al. (2007) reintroduced for v3.9 to reflect that the reference product of 'natural gas, burned in gas turbine' was changed back to the fuel input (rather than the output of electricity). The amount is corrected for the difference in NCV (v2: 36.3 vs. v3.9: 36.0 MJ/m3) assumed in the supplying datasets.
- natural gas, high pressure: 0.00273972 m3; = methane_losses/0.716; lognormal variance with pedigree 0.0418, pedigree (2,3,5,1,1)
  EcoSpold01Location=RU
  calculated based on leakage (methane losses) and methane content in gas.
  Uncertainty: published data
  properties: carbon content, fossil 0.602381, dry mass 0.84 kg, heating value, net 36 MJ, wet mass 0.84 kg
  note on carbon content, fossil: An average C content of 0.506 kg C/ m3 has been assumed (this average has been calculated using data in Tab 3.5, ecoinvent v2.2 report 6_V
  note on heating value, net: Literature value, Source: Christoph Meili;Niels Jungbluth;Maresa Bussa (2021) Life cycle inventories of crude oil and natural gas extraction. ESU-services Ltd. commissioned by BAFU & VSG, Schaffhausen, Switzerland, http://esu-services.ch/data/public-lci-reports/
- pipeline, natural gas, long distance, high capacity, onshore: 2.59e-9 km; lognormal variance with pedigree 0.3186, pedigree (3,3,4,1,3)
  based on estimated standard capacity
  EcoSpold01Location=GLO
  Uncertainty: based on estimated standard capacity
- waste mineral oil: -8.39411e-7, -3.20588e-7 kg (2 suppliers, which the file names only by identifier); sum of these -1.16e-6 kg; lognormal variance with pedigree 0.0038, pedigree (2,3,1,5,1)
  EcoSpold01Location=CH
  based on dutch data. Originates from the condensing of natural gas in the pipelines.
  Uncertainty: based on dutch data
  production volume
    Calculated from the production volume of transport, pipeline, long distance, natural gas in proportion to the respective output amounts.
  properties: carbon content, fossil 0.864444, dry mass 0.9 kg, heating value, net 34.7 MJ, water content 0.111111, wet mass 1 kg
  note on carbon content, fossil: Tab A.6, ecoinvent v2.2 report 13_I. C content has been calculated after data in the tables, and then referred to 1 kg DM
  note on heating value, net: Value taken from the general comment of the treatment dataset.

## Emissions to nature
- Butane [air, non-urban air or from high stacks]: 2.73972e-6 kg; = 0.002*0.001/(1*0.73); lognormal variance with pedigree 0.1686, pedigree (2,5,5,1,1)
  calculated based on leakage (0.2% per 1000km) and gas composition and a density of 0.73 kg/Nm3 (conversion to tkm).
  Uncertainty: calculated based on leakage and gas composition
- Carbon dioxide, fossil [air, non-urban air or from high stacks]: 2.73972e-6 kg; = 0.002*0.001/(1*0.73); lognormal variance with pedigree 0.0492, pedigree (2,5,5,1,1)
  (same comment as for Butane)
- Ethane [air, non-urban air or from high stacks]: 1.64383e-5 kg; = 0.002*0.006/(1*0.73); lognormal variance with pedigree 0.1686, pedigree (2,5,5,1,1)
  (same comment as for Butane)
- Mercury II [air, non-urban air or from high stacks]: 2.73972e-11 kg; = 0.002*1e-8/(1*0.73); lognormal variance with pedigree 0.706025, pedigree (4,5,5,2,1)
  (same comment as for Butane)
- Methane, bromochlorodifluoro-, Halon 1211 [air, non-urban air or from high stacks]: 2.24e-8 kg; lognormal variance with pedigree 0.0512, pedigree (2,3,4,5,1)
  dutch environmental report + qualified estimates.Emissions originating from the cooling of compressor stations.
  Uncertainty: dutch environmental report + qualified estimates
- Methane, chlorodifluoro-, HCFC-22 [air, non-urban air or from high stacks]: 6.92999e-8 kg; lognormal variance with pedigree 0.0512, pedigree (2,3,4,5,1)
  (same comment as for Methane, bromochlorodifluoro-, Halon 1211)
- Methane, fossil [air, non-urban air or from high stacks]: 0.00196164 kg; name methane_losses; = 0.002*0.716/(1*0.73); lognormal variance with pedigree 0.1686, pedigree (2,5,5,1,1)
  (same comment as for Butane)
- NMVOC, non-methane volatile organic compounds [air, non-urban air or from high stacks]: 2.73972e-6 kg; = 0.002*0.001/(1*0.73); lognormal variance with pedigree 0.1686, pedigree (2,5,5,1,1)
  (same comment as for Butane)
- Propane [air, non-urban air or from high stacks]: 5.47945e-6 kg; = 0.002*0.002/(1*0.73); lognormal variance with pedigree 0.1686, pedigree (2,5,5,1,1)
  (same comment as for Butane)

## Sampling procedure
statistics
