# swath, by rotary windrower

Dataset: EcoSpold 2, unit process
Geography: Canada without Quebec
Time period: 2019-01-01 to 2022-12-31
Technology level: current
Classification: ISIC rev.4 ecoinvent: 0161:Support activities for crop production
Scenario: Business-as-Usual
System model: Allocation at the point of substitution
Generated by: Avraam Symeonidis
Published in: Nemecek, T. 2007
Database: ecoinvent
isCopyrightProtected: true

## General comment
Rotary windrower, working width 3m. FU is one ha windrowed fodder.
Dataset exchanges scaled from GLO dataset based on diesel consumption in Canada. Created to proxy farm machinery/fieldwork representative of the Canadian context.

## Included activities start
From agricultural field foreseen to be processed.

## Included activities end
The inventory takes into account the diesel fuel consumption and the amount of agricultural machinery and of the shed, which has to be attributed to the swathing. Also taken into consideration is the amount of emissions to the air from combustion and the emission to the soil from tyre abrasion during the work process. The following activities where considered part of the work process: preliminary work at the farm, like attaching the adequate machine to the tractor; transfer to field (with an assumed distance of 1 km); field work (for a parcel of land of 1 ha surface); transfer to farm and concluding work, like uncoupling the machine. The overlapping during the field work is considered. The amount of swathed good is not taken into account. Not included are dust other than from combustion and noise.

## Technology
Emissions and fuel consumption by the newest models of tractors set into operation during the period from 1999 to 2001.

## Time period
Measurements were made in the last few years (1999-2001). Diesel consumption data refer to year of 2019.

## Reference product
- swath, by rotary windrower: 1 ha; By-product classification allocatable product; CPC 86119: Other support services to crop production
  production volume 8.06075e7 ha
    GDP scaled from the respective global value assuming that Canada accounts for 2.4% of the global GDP. FAOSTAT data year 2011: Permanent meadows and pastures area, 1 cut per year assumed (considering grazing, own estimation)
  property price 5.95542 EUR2005
    Calculated based on inputs: The price of the product has been calculated as a sum of the values of the material and energy inputs for this product. This value is therefore a rough estimation. It may underestimate the real price since there are additional expenses when producing any product. These expences can include for example labour costs, treatment of waste materials and profit for the producer. Please consider carefully whether this level of data quality is acceptable for your application.
  properties: carbon allocation 0 kg, carbon content 0

## Inputs from technosphere
- agricultural machinery, unspecified: 0.404 kg; lognormal variance with pedigree 0.0042, pedigree (1,4,2,5,1)
- diesel: 3.95299 kg; lognormal variance with pedigree 0.0042, pedigree (1,4,2,5,1)
  property calculation property, kg 0 kg; name m_diesel
  properties: carbon content, fossil 0.865, dry mass 1 kg, heating value, net 42.8 MJ, wet mass 1 kg
  note on calculation property, kg: Mass output. Defined here for use in the combined production calculations.
  note on carbon content, fossil: C-content of diesel is 86.5% (ecoinvent v2.2 report 6_IV, Tab 3.14)
- shed: 0.00426 m2; lognormal variance with pedigree 0.3042, pedigree (1,4,2,5,1)
- tractor, 4-wheel, agricultural: 0.458 kg; lognormal variance with pedigree 0.0042, pedigree (1,4,2,5,1)

## Emissions to nature
- Ammonia [air, non-urban air or from high stacks]: 7.90598e-5 kg; = 0.0000588* diesel/2.94; lognormal variance with pedigree 0.0603, pedigree (1,2,2,5,3)
  Air emissions are adjusted based on diesel amount used by this service activity.
- Benzene [air, non-urban air or from high stacks]: 2.89079e-5 kg; = 0.0000215* diesel/2.94; lognormal variance with pedigree 0.0603, pedigree (1,2,2,5,3)
  Air emissions are adjusted based on diesel amount used by this service activity.
- Benzo(a)pyrene [air, non-urban air or from high stacks]: 1.1859e-7 kg; = 0.0000000882* diesel/2.94; lognormal variance with pedigree 0.6603, pedigree (1,2,2,5,3)
  Air emissions are adjusted based on diesel amount used by this service activity.
- Cadmium II [air, non-urban air or from high stacks]: 3.95299e-8 kg; = 0.0000000294* diesel/2.94; lognormal variance with pedigree 0.6603, pedigree (1,2,2,5,3)
  Air emissions are adjusted based on diesel amount used by this service activity.
- Carbon dioxide, fossil [air, non-urban air or from high stacks]: 12.3027 kg; = 9.15* diesel/2.94; lognormal variance with pedigree 0.0203, pedigree (1,2,2,5,3)
  Air emissions are adjusted based on diesel amount used by this service activity.
- Carbon monoxide, fossil [air, non-urban air or from high stacks]: 0.0215129 kg; = 0.016* diesel/2.94; lognormal variance with pedigree 0.6542, pedigree (1,4,2,5,1)
  Air emissions are adjusted based on diesel amount used by this service activity.
- Chromium III [air, non-urban air or from high stacks]: 1.97649e-7 kg; = 0.000000147* diesel/2.94; lognormal variance with pedigree 0.6603, pedigree (1,2,2,5,3)
  Air emissions are adjusted based on diesel amount used by this service activity.
- Copper ion [air, non-urban air or from high stacks]: 6.72277e-6 kg; = 0.000005* diesel/2.94; lognormal variance with pedigree 0.6603, pedigree (1,2,2,5,3)
  Air emissions are adjusted based on diesel amount used by this service activity.
- Dinitrogen monoxide [air, non-urban air or from high stacks]: 0.000474627 kg; = 0.000353* diesel/2.94; lognormal variance with pedigree 0.0603, pedigree (1,2,2,5,3)
  Air emissions are adjusted based on diesel amount used by this service activity.
- Methane, fossil [air, non-urban air or from high stacks]: 0.000509586 kg; = 0.000379* diesel/2.94; lognormal variance with pedigree 0.0603, pedigree (1,2,2,5,3)
  Air emissions are adjusted based on diesel amount used by this service activity.
- NMVOC, non-methane volatile organic compounds [air, non-urban air or from high stacks]: 0.0142523 kg; = 0.0106* diesel/2.94; lognormal variance with pedigree 0.0442, pedigree (1,4,2,5,1)
  Air emissions are adjusted based on diesel amount used by this service activity.
- Nickel II [air, non-urban air or from high stacks]: 2.76978e-7 kg; = 0.000000206* diesel/2.94; lognormal variance with pedigree 0.6603, pedigree (1,2,2,5,3)
  Air emissions are adjusted based on diesel amount used by this service activity.
- Nitrogen oxides [air, non-urban air or from high stacks]: 0.178826 kg; = 0.133* diesel/2.94; lognormal variance with pedigree 0.0442, pedigree (1,4,2,5,1)
  Air emissions are adjusted based on diesel amount used by this service activity.
- PAH, polycyclic aromatic hydrocarbons [air, non-urban air or from high stacks]: 1.30018e-5 kg; = 0.00000967* diesel/2.94; lognormal variance with pedigree 0.3203, pedigree (1,2,2,5,3)
  Air emissions are adjusted based on diesel amount used by this service activity.
- Particulate Matter, < 2.5 um [air, non-urban air or from high stacks]: 0.0133649 kg; = 0.00994* diesel/2.94; lognormal variance with pedigree 0.3203, pedigree (1,2,2,5,3)
  Air emissions are adjusted based on diesel amount used by this service activity.
- Selenium IV [air, non-urban air or from high stacks]: 3.95299e-8 kg; = 0.0000000294* diesel/2.94; lognormal variance with pedigree 0.0603, pedigree (1,2,2,5,3)
  Air emissions are adjusted based on diesel amount used by this service activity.
- Sulfur dioxide [air, non-urban air or from high stacks]: 0.00397988 kg; = 0.00296* diesel/2.94; lognormal variance with pedigree 0.0203, pedigree (1,2,2,5,3)
  Air emissions are adjusted based on diesel amount used by this service activity.
- Zinc II [air, non-urban air or from high stacks]: 3.95299e-6 kg; = 0.00000294* diesel/2.94; lognormal variance with pedigree 0.6603, pedigree (1,2,2,5,3)
  Air emissions are adjusted based on diesel amount used by this service activity.
- Cadmium II [soil, agricultural]: 2.36e-7 kg; lognormal variance with pedigree 0.0442, pedigree (1,4,2,5,1)
- Lead II [soil, agricultural]: 1.04e-6 kg; lognormal variance with pedigree 0.0442, pedigree (1,4,2,5,1)
- Zinc II [soil, agricultural]: 0.000622 kg; lognormal variance with pedigree 0.0442, pedigree (1,4,2,5,1)

## Sampling procedure
The inventoried HC, NOx, CO and fuel consumption values are measurements made following two test cycles (ISO 8178 C1 test and a specific 6-level-test created by the FAT) and on measurements made during the field work. The other emissions were calculated basing on literature data and the measured fuel consumption.

## Extrapolations
Values given in the reference are representative for the chosen work processes. Processes are typical procedures for Switzerland around the year 2000, they are not statistical average processes. This dataset has been copied from an original dataset covering the geography CH. The uncertainty has been adjusted accordingly.
