# treatment of wood ash mixture, pure, municipal incineration

Dataset: EcoSpold 2, unit process
Geography: CH
Time period: 1994-01-01 to 2022-12-31
Technology level: outdated
Classification: ISIC rev.4 ecoinvent: 3821:Treatment and disposal of non-hazardous waste
Classification: EcoSpold01Categories: waste management/municipal incineration
Tags: ConvertedDataset; Treatment
Scenario: Business-as-Usual
System model: Allocation at the point of substitution
Generated by: Gabor Doka (obsolete)
Published in: Doka G. 2007
Database: ecoinvent
isCopyrightProtected: true

## General comment
Inventoried waste contains 100% wood ash pure; .
waste composition (wet, in ppm): H2O n.a.; O 445010; H n.a.; C 12000; S 9200; N n.a.; P 9800; B n.a.; Cl 3200; Br n.a.; F n.a.; I n.a.; Ag n.a.; As 6.7; Ba n.a.; Cd 14.2; Co 18; Cr 194.9; Cu 163.2; Hg 0.1; Mn 19956; Mo 3.7; Ni 55.2; Pb 65; Sb n.a.; Se n.a.; Sn n.a.; V 39.5; Zn 1662; Be n.a.; Sc n.a.; Sr n.a.; Ti 1383; Tl n.a.; W n.a.; Si 82600; Fe 22833; Ca 284400; Al 20800; K 54500; Mg 32100; Na n.a.;
Share of carbon in waste that is biogenic 100%.
Share of iron in waste that is metallic/recyclable 0%.
Net energy produced in MSWI: 0MJ/kg waste electric energy and 0MJ/kg waste thermal energy
Allocation of energy production: no substitution or expansion. Total burden allocated to waste disposal function of MSWI.
One kg of this waste produces 0.8507 kg of slag and 0 kg of residues, which are landfilled.
[This dataset was already contained in the ecoinvent database version 2. It was not individually updated during the transfer to ecoinvent version 3. Life Cycle Impact Assessment results may still have changed, as they are affected by changes in the supply chain, i.e. in other datasets. This dataset was generated following the ecoinvent quality guidelines for version 2. It may have been subject to central changes described in the ecoinvent version 3 change report (http://www.ecoinvent.org/database/ecoinvent-version-3/reports-of-changes/), and the results of the central updates were reviewed extensively. The changes added e.g. consistent water flows and other information throughout the database. The documentation of this dataset can be found in the ecoinvent reports of version 2, which are still available via the ecoinvent website. The change report linked above covers all central changes that were made during the conversion process.]

## Included activities end
waste-specific air and water emisions from incineration, auxiliary material consumption for flue gas cleaning. Short-term emissions to river water and long-term emisisons to ground water from slag compartment (from bottom slag) and residual material landfill (from solidified fly ashes and scrubber slugde). Process energy demands for MSWI.

## Geography
Specific to the technology mix encountered in Switzerland in 2000. Well applicable to modern incineration practices in Europe, North America or Japan.

## Technology
replaced by newer incineration technology with fly ash extraction. Average Swiss MSWI plants in 2000 with electrostatic precipitator for fly ash (ESP), wet flue gas scrubber and 29.4% SNCR , 32.2% SCR-high dust , 24.6% SCR-low dust -DeNOx facilities and 13.8% without Denox (by burnt waste, according to Swiss average). Share of waste incinerated in plants with magnetic scrap separation from slag : 50%. Gross electric efficiency technology mix 12.997% and Gross thermal efficiency technology mix 25.57%

## Time period
Waste composition as given in literature reference, theoretical data or other source. Transfer coefficients for modern Swiss MSWI. Emission speciation based on early 90ies data.

## Reference product
- wood ash mixture, pure: -1 kg; By-product classification Waste; CPC 3928: Sawdust and wood waste and scrap
  EcoSpold01Location=CH
  production volume 0 kg
    outdated. Replaced by newer incineration technology with fly ash extraction.
  property heating value, net 0 MJ
    Non combustible products are assumed to have an LHV equal to zero (0).
  property price 0 EUR2005
    Waste products are assigned a price of zero as they are assumed to require further treatment.
  properties: carbon allocation 0.012 kg, carbon content 0.012, carbon content, fossil 0, carbon content, non-fossil 0.012, dry mass 1 kg, water content 0, water in wet mass 0 kg, wet mass 1 kg

## Inputs from technosphere
- electricity, for reuse in municipal waste incineration only: 0.144 kWh; name E_el_prod_MSWI; lognormal variance with pedigree 0.48, pedigree (1,1,5,1,1)
  uncertainty is calculated from uncertainties in waste composition and uncertainties in energy efficiency and the uncertainty in internal energy demand
- heat, for reuse in municipal waste incineration only: 0.839 MJ; name E_th_prod_MSWI; lognormal variance with pedigree 0.04, pedigree (1,1,5,1,1)
  (same comment as for electricity, for reuse in municipal waste incineration only)
- municipal waste incineration facility: 2.5e-10 unit; lognormal variance with pedigree 0.04, pedigree (1,1,5,1,1)
  demands per kilogram waste. uncertainty is heeded in the module
  EcoSpold01Location=CH
- process-specific burdens, municipal waste incineration: 1 kg; lognormal variance with pedigree 0.04, pedigree (1,1,5,1,1)
  EcoSpold01Location=CH
  demands per kilogram waste. uncertainty is heeded in the module;activityLink introduced to establish a direct link to the corresponding regional supply of this product
- process-specific burdens, slag landfill: 0.851 kg; lognormal variance with pedigree 0.05, pedigree (1,1,5,1,1)
  EcoSpold01Location=CH
  uncertainty is calculated from uncertainties in waste composition and transfer coefficients in incinerator;activityLink introduced to establish a direct link to the corresponding regional supply of this product
- slag landfill: 1.51e-9 unit; lognormal variance with pedigree 0.05, pedigree (1,1,5,1,1)
  EcoSpold01Location=CH
  uncertainty is calculated from uncertainties in waste composition and transfer coefficients in incinerator

## Emissions to nature
- Carbon monoxide, non-fossil [air, urban air close to ground]: 0.000223 kg; lognormal variance with pedigree 0.690625, pedigree (1,3,5,2,1)
  Literature data from switzerland and germany adapted to plant age distribution in switzerland
  Uncertainty: & basic uncertainty of 5; literature data from switzerland and germany adapted to plant age distribution in switzerland
- Methane, non-fossil [air, urban air close to ground]: 6.38e-6 kg; lognormal variance with pedigree 0.091225, pedigree (2,3,5,2,1)
  Confidential data from 5 plants in Switzerland and Germany
  Uncertainty: & basic uncertainty of 1.5; confidential data from 5 plants in Switzerland and Germany
- Aluminium III [water, ground-, long-term]: 0.017 kg; lognormal variance with pedigree 0.33, pedigree (1,1,5,1,1)
  Long-term emissions from landfilling of incineration residues. uncertainty is calculated from uncertainties in waste composition and transfer coefficients in incinerator and landfills.
- Aluminium III [water, surface water]: 2.73e-7 kg; lognormal variance with pedigree 1.54, pedigree (1,1,5,1,1)
  uncertainty is calculated from uncertainties in waste composition and transfer coefficients in incinerator and landfills
- Arsenic ion [water, ground-, long-term]: 6.69e-6 kg; lognormal variance with pedigree 1.36, pedigree (1,1,5,1,1)
  (same comment as for Aluminium III)
- Arsenic ion [water, surface water]: 1.01e-8 kg; lognormal variance with pedigree 1.96, pedigree (1,1,5,1,1)
  (same comment as for Aluminium III)
- BOD5, Biological Oxygen Demand [water, ground-, long-term]: 0.0099 kg; lognormal variance with pedigree 0.39, pedigree (1,1,5,1,1)
  (same comment as for Aluminium III)
- BOD5, Biological Oxygen Demand [water, surface water]: 1.78e-5 kg; lognormal variance with pedigree 0.96, pedigree (1,1,5,1,1)
  (same comment as for Aluminium III)
- COD, Chemical Oxygen Demand [water, ground-, long-term]: 0.0303 kg; lognormal variance with pedigree 0.39, pedigree (1,1,5,1,1)
  (same comment as for Aluminium III)
- COD, Chemical Oxygen Demand [water, surface water]: 5.45e-5 kg; lognormal variance with pedigree 0.96, pedigree (1,1,5,1,1)
  (same comment as for Aluminium III)
- Cadmium II [water, ground-, long-term]: 1.42e-5 kg; lognormal variance with pedigree 1.26, pedigree (1,1,5,1,1)
  (same comment as for Aluminium III)
- Cadmium II [water, surface water]: 7.31e-9 kg; lognormal variance with pedigree 2, pedigree (1,1,5,1,1)
  (same comment as for Aluminium III)
- Calcium II [water, ground-, long-term]: 0.283 kg; lognormal variance with pedigree 0.08, pedigree (1,1,5,1,1)
  (same comment as for Aluminium III)
- Calcium II [water, surface water]: 0.00124 kg; lognormal variance with pedigree 0.55, pedigree (1,1,5,1,1)
  (same comment as for Aluminium III)
- Chloride [water, ground-, long-term]: 0.000436 kg; lognormal variance with pedigree 0.57, pedigree (1,1,5,1,1)
  (same comment as for Aluminium III)
- Chloride [water, surface water]: 0.00276 kg; lognormal variance with pedigree 0.55, pedigree (1,1,5,1,1)
  (same comment as for Aluminium III)
- Chromium VI [water, ground-, long-term]: 1.28e-6 kg; lognormal variance with pedigree 4.23, pedigree (1,1,5,1,1)
  (same comment as for Aluminium III)
- Chromium VI [water, surface water]: 5.57e-9 kg; lognormal variance with pedigree 2.04, pedigree (1,1,5,1,1)
  (same comment as for Aluminium III)
- Cobalt II [water, ground-, long-term]: 1.8e-5 kg; lognormal variance with pedigree 1.23, pedigree (1,1,5,1,1)
  (same comment as for Aluminium III)
- Cobalt II [water, surface water]: 2.5e-9 kg; lognormal variance with pedigree 2.14, pedigree (1,1,5,1,1)
  (same comment as for Aluminium III)
- Copper ion [water, ground-, long-term]: 0.000163 kg; lognormal variance with pedigree 0.94, pedigree (1,1,5,1,1)
  (same comment as for Aluminium III)
- Copper ion [water, surface water]: 5.67e-9 kg; lognormal variance with pedigree 2.03, pedigree (1,1,5,1,1)
  (same comment as for Aluminium III)
- DOC, Dissolved Organic Carbon [water, ground-, long-term]: 0.012 kg; lognormal variance with pedigree 0.39, pedigree (1,1,5,1,1)
  (same comment as for Aluminium III)
- DOC, Dissolved Organic Carbon [water, surface water]: 2.16e-5 kg; lognormal variance with pedigree 0.96, pedigree (1,1,5,1,1)
  (same comment as for Aluminium III)
- Iron ion [water, ground-, long-term]: 0.0119 kg; lognormal variance with pedigree 0.42, pedigree (1,1,5,1,1)
  (same comment as for Aluminium III)
- Iron ion [water, surface water]: 1.91e-7 kg; lognormal variance with pedigree 1.59, pedigree (1,1,5,1,1)
  (same comment as for Aluminium III)
- Lead II [water, ground-, long-term]: 6.5e-5 kg; lognormal variance with pedigree 1.06, pedigree (1,1,5,1,1)
  (same comment as for Aluminium III)
- Lead II [water, surface water]: 1.19e-9 kg; lognormal variance with pedigree 2.24, pedigree (1,1,5,1,1)
  (same comment as for Aluminium III)
- Magnesium [water, ground-, long-term]: 0.032 kg; lognormal variance with pedigree 0.27, pedigree (1,1,5,1,1)
  (same comment as for Aluminium III)
- Magnesium [water, surface water]: 0.000122 kg; lognormal variance with pedigree 0.76, pedigree (1,1,5,1,1)
  (same comment as for Aluminium III)
- Manganese II [water, ground-, long-term]: 0.02 kg; lognormal variance with pedigree 0.33, pedigree (1,1,5,1,1)
  (same comment as for Aluminium III)
- Manganese II [water, surface water]: 1.02e-6 kg; lognormal variance with pedigree 1.37, pedigree (1,1,5,1,1)
  (same comment as for Aluminium III)
- Mercury II [water, ground-, long-term]: 9.74e-8 kg; lognormal variance with pedigree 1.9, pedigree (1,1,5,1,1)
  (same comment as for Aluminium III)
- Mercury II [water, surface water]: 2.62e-9 kg; lognormal variance with pedigree 2.16, pedigree (1,1,5,1,1)
  (same comment as for Aluminium III)
- Molybdenum VI [water, ground-, long-term]: 3.53e-6 kg; lognormal variance with pedigree 1.44, pedigree (1,1,5,1,1)
  (same comment as for Aluminium III)
- Molybdenum VI [water, surface water]: 1.72e-7 kg; lognormal variance with pedigree 1.63, pedigree (1,1,5,1,1)
  (same comment as for Aluminium III)
- Nickel II [water, ground-, long-term]: 5.52e-5 kg; lognormal variance with pedigree 1.08, pedigree (1,1,5,1,1)
  (same comment as for Aluminium III)
- Nickel II [water, surface water]: 3.48e-8 kg; lognormal variance with pedigree 1.79, pedigree (1,1,5,1,1)
  (same comment as for Aluminium III)
- Phosphate [water, ground-, long-term]: 0.000396 kg; lognormal variance with pedigree 5.09, pedigree (1,1,5,1,1)
  (same comment as for Aluminium III)
- Phosphate [water, surface water]: 6.62e-7 kg; lognormal variance with pedigree 1.56, pedigree (1,1,5,1,1)
  (same comment as for Aluminium III)
- Potassium I [water, ground-, long-term]: 0.0479 kg; lognormal variance with pedigree 0.22, pedigree (1,1,5,1,1)
  (same comment as for Aluminium III)
- Potassium I [water, surface water]: 0.00659 kg; lognormal variance with pedigree 0.32, pedigree (1,1,5,1,1)
  (same comment as for Aluminium III)
- Silicon [water, ground-, long-term]: 0.000707 kg; lognormal variance with pedigree 5.85, pedigree (1,1,5,1,1)
  (same comment as for Aluminium III)
- Silicon [water, surface water]: 3.05e-6 kg; lognormal variance with pedigree 1.27, pedigree (1,1,5,1,1)
  (same comment as for Aluminium III)
- Sulfate [water, ground-, long-term]: 0.0251 kg; lognormal variance with pedigree 0.42, pedigree (1,1,5,1,1)
  (same comment as for Aluminium III)
- Sulfate [water, surface water]: 0.00252 kg; lognormal variance with pedigree 0.55, pedigree (1,1,5,1,1)
  (same comment as for Aluminium III)
- TOC, Total Organic Carbon [water, ground-, long-term]: 0.012 kg; lognormal variance with pedigree 0.39, pedigree (1,1,5,1,1)
  (same comment as for Aluminium III)
- TOC, Total Organic Carbon [water, surface water]: 2.16e-5 kg; lognormal variance with pedigree 0.96, pedigree (1,1,5,1,1)
  (same comment as for Aluminium III)
- Titanium ion [water, ground-, long-term]: 0.000415 kg; lognormal variance with pedigree 1.02, pedigree (1,1,5,1,1)
  (same comment as for Aluminium III)
- Titanium ion [water, surface water]: 6.67e-9 kg; lognormal variance with pedigree 2.01, pedigree (1,1,5,1,1)
  (same comment as for Aluminium III)
- Vanadium V [water, ground-, long-term]: 3.86e-6 kg; lognormal variance with pedigree 2.48, pedigree (1,1,5,1,1)
  (same comment as for Aluminium III)
- Vanadium V [water, surface water]: 1.75e-8 kg; lognormal variance with pedigree 1.88, pedigree (1,1,5,1,1)
  (same comment as for Aluminium III)
- Zinc II [water, ground-, long-term]: 0.00166 kg; lognormal variance with pedigree 0.63, pedigree (1,1,5,1,1)
  (same comment as for Aluminium III)
- Zinc II [water, surface water]: 4.95e-8 kg; lognormal variance with pedigree 1.74, pedigree (1,1,5,1,1)
  (same comment as for Aluminium III)

## Sampling procedure
waste-specific calculation based on literature data

## Extrapolations
Typical elemental transfer coefficients from current studies for modern MSWI, completed with data from coal power plants and estimates, adapted for inert/burnable waste.

## Review by Niels Jungbluth 2003-07-15
Passed. Calculation for standard deviation 95 of, i.e., infrastructure,
land occupation, transport services or other services can differ from
standard Pedigree approach used in this project and figures obtained by
this procedure.
