# treatment of sewage sludge, 75% water, WWT, WW from ammonium paratungstate production, sanitary landfill

Dataset: EcoSpold 2, unit process
Geography: RoW
Time period: 1994-01-01 to 2022-12-31
Technology level: current
Classification: ISIC rev.4 ecoinvent: 3821:Treatment and disposal of non-hazardous waste
Scenario: Business-as-Usual
System model: Allocation at the point of substitution
Generated by: Nikolia Stoikou
Database: ecoinvent
isCopyrightProtected: true

## General comment
The process represents the treatment of a waste (sewage sludge) that is exclusively generated from another waste treatment. Sewage sludge is generated in the wastewater treatment of 'wastewater from ammonium paratungstate production'. Recommended use of this dataset: to be used within the specific chain of treatments for 'wastewater from ammonium paratungstate production'. Share of biogenic carbon in the sludge: 0%. Landfill gas capture and utilisation generates 0.03321 kWh of electricity and 0.0599 MJ of useful heat. 0.002598 kg waste mass remains in the landfill even after the long term period.

## Included activities start
The activity starts with the waste being available at the gate of the treatment facility. Collection and transportation of the waste to the treatment plant is not included.

## Included activities end
The activity ends with the waste being treated and waste-specific emissions from the landfill are released to the environment (air due to landfil gas and water due to landfil leachate).

## Geography
Landfill site with mean annual temperature (MAT) of 16.743579766537 degC, mean annual precipitation (MAP) of 1250.84108527132 mm/year, and net infiltration of 790.252035689178 mm/year.The leachate percolating through the landfill has an average residence time of 6.33 years.
References: UN data, 2020. Precipitation, Environment Statistics Database, United Nations Statistics Division Available at: http://data.un.org/Data.aspx?q=precipitation&d=ENV&f=variableID%3a6;
World Bank, 2022. Surface area (sq.km), World Bank Group Available at: https://data.worldbank.org/indicator/AG.SRF.TOTL.K2;
Doka G.,2021. A model for composition-specific life cycle inventories of regionalised wastewater fates, Zurich, Switzerland. http://www.doka.ch/publications.htm

## Technology
Sanitary (controlled) landfill for municipal solid waste. Ultimate average landfill height is 20 meters. Operation phase duration is 30 years. The total raw landfill gas mass produced in the landfill from this waste is 0.09496 kg. The total CH4 mass in the raw landfill gas is 0.003752 kg. Percentage of landfill gas directly emitted is 47w%. Percentage of landfill gas captured and flared is 18.02w%. Percentage of landfill gas captured and utilised is 34.98%. Conversion efficiencies are 27.8e% for electricity and 13.5e% for useful heat. Leachate generated during the first 100 years is collected and treated region-specifically before emission. Based on average waste composition and climate data the end of carbonate phase is estimated to be reached 2'863 years after waste deposition.

## Reference product
- heat, district or industrial, other than natural gas: 1 MJ; By-product classification allocatable product; CPC 17300: Steam and hot water; lognormal variance with pedigree 0.5224, pedigree (5,5,5,5,5)
  Net production of heat from landfill gas utilisation.
  Uncertainty: Uncertainty calculated depending on waste input and uncertainty of transfer coefficients in landfill to landfill gas, uncertainty in gas capture and utilisation.
  production volume 1246.4 MJ
    Calculated from the production volume of the reference product in proportion to the respective output amounts.
  property corresponding fuel use, propane, furnace >100kW 0 MJ; name fuel_use
    Lower heating value of the fuel input related to the heat/electricity output, taken directly from ecoinvent v3.0 dataset "heat production, natural gas, at industrial furnace >100kW, GLO 2000".
  property price 0.0106 EUR2005
    Average European district heat price from Ecoheatcool and Euroheat 2005-2006, Ecoheat Work package 1: The European heat market. Final report. 10.6 EUR/GJ i s the price of district heat. http://www.solarthermalworld.org/files/Ecoheatcool%20WP1%20Web.pdf?download
  properties: carbon allocation 0 kg, carbon content 0, carbon content, fossil 0, carbon content, non-fossil 0, dry mass 1 kg, heating value, net 1 MJ, water content 0, water in wet mass 0 kg, wet mass 1 kg

## Inputs from technosphere
- aluminium sulfate, powder: 9.21496e-6, 5.59886e-6 kg (2 suppliers, which the file names only by identifier); sum of these 1.48138e-5 kg
- ammonia, anhydrous, liquid: 1.15692e-6, 1.21258e-7, 2.79943e-5, 2.59953e-5, 4.45645e-6, 5.95982e-7, 5.42068e-7, 1.28238e-5, 3.83086e-7 kg (9 suppliers, which the file names only by identifier); sum of these 7.40691e-5 kg
- chemical, organic: 4.11495e-5 kg
- electricity, medium voltage: 3.43517e-7, 9.66809e-7, 9.24193e-8, 2.5746e-8, 3.14123e-7, 4.36173e-8, 1.66052e-6, 1.05374e-5, 3.89073e-6, 2.08182e-6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 kWh (48 suppliers, which the file names only by identifier); sum of these 0.000534943 kWh
- fatty alcohol: 4.11495e-5 kg
- inert waste: -0.000159793, -2.79368e-7, -0.000262718 kg (3 suppliers, which the file names only by identifier); sum of these -0.00042279 kg
- kerosene: 6.67606e-7, 0.000286228, 4.00029e-6, 0.000186629, 1.26912e-5, 8.47673e-7, 1.64282e-6, 1.08734e-6 kg (8 suppliers, which the file names only by identifier); sum of these 0.000493794 kg
- magnesium sulfate: 5.34943e-6 kg
- non-ferrous metal smelter: 3.10562e-15 unit
- soda ash, light: 0.000882804 kg
- sodium hydrosulfide: 1.87366e-5 kg
- sodium hydroxide, without water, in 50% solution state: 1.97518e-5 kg
- spent solvent mixture: -0.000553006, -2.19487e-6, -0.000337331 kg (3 suppliers, which the file names only by identifier); sum of these -0.000892532 kg
- sulfuric acid: 0.000123514, 7.50449e-5 kg (2 suppliers, which the file names only by identifier); sum of these 0.000198559 kg
- tungsten concentrate: 0.000576093 kg
- wastewater from ammonium paratungstate production: -9.58954e-6, -4.44765e-7 m3 (2 suppliers, which the file names only by identifier); sum of these -1.00343e-5 m3
- water, deionised: 7.41366e-7, 0.000933143, 0.00153508 kg (3 suppliers, which the file names only by identifier); sum of these 0.00246897 kg

## Inputs from nature
- Water, well, in ground [natural resource, in water]: 7.09422e-6 m3

## Emissions to nature
- Ammonia [air, non-urban air or from high stacks]: 4.45237e-5 kg
- Carbon dioxide, fossil [air, non-urban air or from high stacks]: 0.00012098 kg
- Hydrogen sulfide [air, non-urban air or from high stacks]: 1.26831e-6 kg
