# treatment of biowaste, industrial composting

Dataset: EcoSpold 2, unit process
Geography: RoW
Time period: 2011-01-01 to 2022-12-31
Technology level: current
Classification: ISIC rev.4 ecoinvent: 3821:Treatment and disposal of non-hazardous waste
Classification: EcoSpold01Categories: agricultural means of production/organic fertiliser
Scenario: Business-as-Usual
System model: Allocation at the point of substitution
Generated by: Mischa Zschokke-Gohl
Published in: Dinkel F. 2012
Database: ecoinvent
isCopyrightProtected: true

## General comment
Biowaste in the current process is defined as follows:
Biodegradable garden and park waste, food and kitchen waste from households, restaurants, caterers and retail premises, comparable waste from food processing plants, it also includes forestry or agricultural residues and manure. It does not include sewage sludge, or other biodegradable waste such as natural textiles, paper or processed wood.
The composting treatment is a process of controlled decomposition and humification of biodegradable materials under managed conditions, which is aerobic and which allows the development of temperatures suitable for mesophilic and thermophilic bacteria as a result of biologically produced heat.
The relevant resulting emissions to air are summarised in the following table:
The resulting output "compost" inventory refers to 1 kg fresh weight of biogenic waste. The process modelled describes industrial composting. Compost is defined as humified solid particulate material that is the result of composting, which has been sanitised and stabilised, and which confers beneficial effects when it is added to soil It is used as growing media constituent, or used in another way in conjunction with plants.

The contents of compost are as follows:
The heavy metal contents of compost are presented in the following table:
Previous studies in the corresponding field showed that the evaluation of heavy metal emissions into soil with various single score methods such as Eco-Indicator 99 and ecological scarcity have a significant impact on the overall results. It is therefore advised to take special care when evaluating these systems, especially to avoid potential double counting.
The output compost uses a special property "humus equivalents" which depicts the amount of organic carbon, which would lead to a buildup of humus.
Different substrates have different capacities of organic matter to form humus (see following table)
The proposed method to account for humus C is based on the following methodology:
The organic carbon content of soil (Corg) is normally used to declare the amount of organic matter of soil. The content of humus is calculated from Corg, using the assumption that humus contains 58% carbon on average.
The amount of humus is therefore calculated out of Corg as follows:
humus content [%] or [mg g-1] = (Ctotal – Cinorg) / 0.58
If an allocation approach with substution is applied, the corresponding amounts of substitutes are calculated based on their capacity to build up humus. The conversion is based on the humus factors, which are listed in the next table:

More detailed descriptions and background information can be found in the corresponding report.
[This dataset is meant to replace the following datasets:
- treatment of biowaste, composting, GLO, 1999 - 1999]

## Included activities end
Energy demand for operating a compost plant was included as well as process emissions, infrastructure of the compost plant and transports related to the collection of the biogenic waste. Values refer to compost with a water content of 50 % by weight.

## Geography
Values refer to the situation in Switzerland.

## Technology
Compost inventory refers to open plant compost production.
The process step-by-step, from shredding to products:

1. Reception and weighing (+ storage of feedstock)

2. Shredding (depending on structure of feedstock)

3. Anaerobic digestion (AD) and solid/liquid separation

4. Rotting process, turning over, aeration and watering
5. Post-processing and conditioning
The scheme for industrial composting as used here is presented the following figure:
To assure best practice and good quality of the resulting product, it is assumed that the treatment process adheres to the following procedure:

## Reference product
- compost: 1 kg; name Mass_compost; = ABS(Mass_biowaste/2); By-product classification allocatable product; CPC 391: Wastes from food and tobacco industry; lognormal variance with pedigree 0.056, pedigree (3,4,1,5,4)
  EcoSpold01Location=CH
  Biowaste is reduced in mass by a factor of 2 during composting
  production volume 4.0887e10 kg
    413'000 tons of compost produced in Switzerland in 2013.
    /report for BAFU by Umweko. Estimates for global volume are very difficult to come by, a very basic assumption with a factor 100 is therefore applied.
  property cadmium content 2.89394e-7; name Mass_compost_Cd_content; = Mass_biowaste_Cd_content/0.5*( DM_biowaste / DM_compost)
    cadmium content on a dry matter basis
  property calcium content 0.0504545; name Mass_compost_Ca_content; = Mass_biowaste_Ca_content/0.5*( DM_biowaste / DM_compost)
    calcium content on a dry matter basis
  property carbon content, non-fossil 0.1165
    calculation: dry matter 50%, organic matter 40% of dry matter, C content calculated from organic matter divided by 1.72. Relative to dry matter; relative to fresh matter: divided by 2 => 0.1156
  property concentration, cadmium 0 kg/kg; name Mass_compost_concentration_Cd; = Mass_biowaste_concentration_Cd*2
    Biowaste mass is reduced by a factor of two during composting, therefore concentration is doubled
  property concentration, calcium 0 kg/kg; name Mass_compost_Ca_concentration; = Mass_biowaste_concentration_Ca*2
    (same comment as for compost)
  property concentration, copper 0 kg/kg; name Mass_compost_concentration_Cu; = Mass_biowaste_concentration_Cu*2
    (same comment as for compost)
  property concentration, lead 0 kg/kg; name Mass_compost_concentration_Pb; = Mass_biowaste_concentration_Pb*2
    (same comment as for compost)
  property concentration, magnesium 0 kg/kg; name Mass_compost_Mg_concentration; = Mass_biowaste_concentration_Mg*2
    (same comment as for compost)
  property concentration, mercury 0 kg/kg; name Mass_compost_Hg_concentration; = Mass_biowaste_concentration_Hg*2
    (same comment as for compost)
  property concentration, nickel 0 kg/kg; name Mass_compost_Ni_concentration; = Mass_biowaste_concentration_Ni*2
    (same comment as for compost)
  property concentration, nitrogen 0 kg/kg; = Mass_biowaste_concentration_N*2
    (same comment as for compost)
  property concentration, phosphorus 0 kg/kg; name Mass_compost_P_concentration; = Mass_biowaste_concentration_P*2
    (same comment as for compost)
  property concentration, potassium 0 kg/kg; name Mass_compost_K_concentration; = Mass_biowaste_concentration_K*2
    (same comment as for compost)
  property concentration, sulfur 0 kg/kg; name Mass_compost_concentration_S; = Mass_biowaste_concentration_S*2
    (same comment as for compost)
  property concentration, zinc 0 kg/kg; name Mass_compost_concentration_Zn; = Mass_biowaste_concentration_Zn*2
    (same comment as for compost)
  property copper content 3.81818e-5; name Mass_compost_Cu_content; = Mass_biowaste_Cu_content/0.5*( DM_biowaste / DM_compost)
    copper content on a dry matter basis
  property dry mass 0.528 kg; name DM_compost
  property humus equivalent 0.061 kg
    Humus building fraction expressed in kg per kg product on a FM basis. Humus denotes the converted, primary biomass from plants or animals in the ground. More information can be found in the documentation of the composting itself: "treatment of biowaste, industrial composting".
  property lead content 2.66667e-5; name Mass_compost_Pb_content; = Mass_biowaste_Pb_content/0.5*( DM_biowaste / DM_compost)
    lead content on a dry matter basis
  property magnesium content 0.00525758; name Mass_compost_Mg_content; = Mass_biowaste_Mg_content/0.5*( DM_biowaste / DM_compost)
    magnesium content on a dry matter basis
  property mercury content 1e-7; name Mass_compost_Hg_content; = Mass_biowaste_Hg_content/0.5*( DM_biowaste / DM_compost)
    mercury content on a dry matter basis
  property nickel content 1.60606e-5; name Mass_compost_Ni_content; = Mass_biowaste_Ni_content/0.5*( DM_biowaste / DM_compost)
    nickel content on a dry matter basis
  property nitrogen content 0.0136364; name Mass_compost_N_content; = Mass_biowaste_N_content/0.5*( DM_biowaste / DM_compost)
    nitrogen content on a dry matter basis
  property phosphorus content 0.00275758; name Mass_compost_P_content; = Mass_biowaste_P_content/0.5*( DM_biowaste / DM_compost)
    phosphorus content on a dry matter basis
  property potassium content 0.0099697; name Mass_compost_K_content; = Mass_biowaste_K_content/0.5*( DM_biowaste / DM_compost)
    potassium content on a dry matter basis
  property price 0.03 EUR2005
    Temporary price data. Calculated as 90% of purchasers price based on: Estimation done using the following sources: <http://www.wmaa.asn.au/uploads/documents/MarkWinser_1May2007.pdf>; <http://www.swlf.ait.ac.th/UpdData/International/Composting%20and%20anaerobic%20digestion_%20comparions%20for%20Europe%20and%20Asia.pdf>; <http://www.epa.gov/osw/conserve/rrr/composting/basic.htm>, accessed 2011.06.16
  property sulfur content 0.00190909; name Mass_compost_S_content; = Mass_biowaste_S_content/0.5*( DM_biowaste / DM_compost)
    sulfur content on a dry matter basis
  property water content 0.893939; name Water_content_compost; = Water_in_wet_mass_compost/DM_compost
  property water in wet mass 0.472 kg; name Water_in_wet_mass_compost; = 1- DM_compost
  property zinc content 0.000120303; name Mass_compost_Zn_content; = Mass_biowaste_Zn_content/0.5*( DM_biowaste / DM_compost)
    zinc content on a dry matter basis
  properties: carbon allocation 0.061512 kg, carbon content 0.1165, carbon content, fossil 0, wet mass 1 kg

## Inputs from technosphere
- EUR-flat pallet: 2.65352e-5, 1.20614e-5 unit (2 suppliers, which the file names only by identifier); sum of these 3.85966e-5 unit
- [thio]carbamate-compound: 4.99532e-7 kg
- acetamide-anillide-compound, unspecified: 3.46322e-11 kg
- acrylic dispersion, with water, in 58% solution state: 1.05077e-9 kg
- acrylic varnish, with water, in 53% solution state: 3.45255e-10 kg
- activated bentonite: 3.49168e-6 kg
- alkylbenzene sulfonate, linear, petrochemical: 2.84073e-9 kg
- aluminium scrap, post-consumer: -2.19868e-8 kg
- aluminium sulfate, powder: 9.12403e-7 kg
- aluminium, wrought alloy: 2.19868e-8 kg
- ammonium nitrate: 2.8622e-5, 4.12696e-5, 2.40372e-5, 0.000288754 kg (4 suppliers, which the file names only by identifier); sum of these 0.000382682 kg
- ammonium sulfate: 7.52302e-7, 6.63529e-6 kg (2 suppliers, which the file names only by identifier); sum of these 7.38759e-6 kg
- application of plant protection product, by field sprayer: 9.51963e-7, 2.70997e-7 ha (2 suppliers, which the file names only by identifier); sum of these 1.22296e-6 ha
- benzimidazole-compound: 1.9804e-8 kg
- biowaste: -0.0252349, -0.000149569 kg (2 suppliers, which the file names only by identifier); sum of these -0.0253845 kg
- bipyridylium-compound: 1.04949e-6 kg
- boric acid, anhydrous, powder: 5.22211e-6 kg
- building, hall: 1.82935e-6 m2
- building, hall, steel construction: 1.23752e-12 m2
- calcium chloride: 7.92027e-10, 2.80422e-9 kg (2 suppliers, which the file names only by identifier); sum of these 3.59625e-9 kg
- chemical, inorganic: 2.76696e-6 kg
- chemical, organic: 1.35531e-6 kg
- chlorine dioxide: 1.92897e-6, 3.98009e-7 kg (2 suppliers, which the file names only by identifier); sum of these 2.32698e-6 kg
- chopping, maize: 2.30881e-10 ha
- cocoons: 2.17583e-6, 2.93532e-5 kg (2 suppliers, which the file names only by identifier); sum of these 3.15291e-5 kg
- compost: 0.00303709 kg
- conveyor belt: 9.20833e-9 m
- copper oxide: 3.23822e-6 kg
- corrugated board box: 2.31902e-8, 5.38269e-8, 8.63838e-10 kg (3 suppliers, which the file names only by identifier); sum of these 7.7881e-8 kg
- cottonseed: 0.00304008, 0.0137291, 2.13076e-5 kg (3 suppliers, which the file names only by identifier); sum of these 0.0167905 kg
- cyclic N-compound: 2.10088e-6 kg
- diesel, burned in agricultural machinery: 0.00409509 MJ
- diesel, burned in building machine: 3.7296e-5 MJ
- dust collector, electrostatic precipitator, for industrial use: 1.19403e-12 unit
- electricity, low voltage: 2.17828e-11, 3.72122e-7, 3.21597e-6, 1.01031e-7, 3.6402e-7, 3.36174e-7, 1.50005e-8, 1.0471e-7, 2.86898e-6, 4.52655e-7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 kWh (144 suppliers, which the file names only by identifier); sum of these 0.00553996 kWh
- electricity, medium voltage: 6.58075e-7, 8.88568e-7, 1.27793e-6, 2.66758e-7, 1.56249e-5, 0.000171029, 8.43871e-7, 1.42084e-9, 3.16002e-7, 3.98768e-6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 kWh (74 suppliers, which the file names only by identifier); sum of these 0.000918223 kWh
- enzymes: 1.17105e-7 kg
- establishing orchard: 0.000508458 unit
- ethanol, without water, in 99.7% solution state, from ethylene: 1.79527e-10, 4.09774e-10 kg (2 suppliers, which the file names only by identifier); sum of these 5.89301e-10 kg
- ethylene glycol monoethyl ether: 4.62694e-10 kg
- fertilising, by broadcaster: 1.80665e-7, 6.69541e-7 ha (2 suppliers, which the file names only by identifier); sum of these 8.50206e-7 ha
- fodder loading, by self-loading trailer: 6.69702e-8 m3
- fruit tree seedling, for planting: 0.000508458 unit
- furnace, wood chips, softwood storage area, 1000kW: 5.9667e-12 unit
- furnace, wood chips, with silo, 1000kW: 1.49724e-11 unit
- furnace, wood chips, with silo, 5000kW: 2.52174e-11 unit
- glyphosate: 7.1555e-7 kg
- green manure, organic, until February: 3.30068e-8 ha
- gypsum, mineral: 0.00012373, 5.80181e-7, 2.60404e-7 kg (3 suppliers, which the file names only by identifier); sum of these 0.00012457 kg
- harvesting, by complete harvester, beets: 3.30068e-8 ha
- hazardous waste, for incineration: -1.87029e-7 kg
- heat, central or small-scale, other than natural gas: 0.00224744, 0.00695929, 0.00123279 MJ (3 suppliers, which the file names only by identifier); sum of these 0.0104395 MJ
- heat, district or industrial, natural gas: 0.000863751, 3.71812e-7, 0.000191973, 0.000147618, 1.65442e-8 MJ (5 suppliers, which the file names only by identifier); sum of these 0.00120373 MJ
- heat, district or industrial, other than natural gas: 0.000100669, 1.10421e-5, 1.08972e-5, 9.30025e-6, 0.00199587, 0.000311725 MJ (6 suppliers, which the file names only by identifier); sum of these 0.0024395 MJ
- hexane: 1.63563e-6 kg
- hoeing: 6.62441e-8 ha
- industrial machine, heavy, unspecified: 8.55488e-10, 3.19175e-10 kg (2 suppliers, which the file names only by identifier); sum of these 1.17466e-9 kg
- inorganic nitrogen fertiliser, as N: 8.63497e-5, 7.45588e-11, 3.29721e-5, 2.06991e-11, 1.4615e-5, 1.32602e-7, 6.42727e-10, 3.43224e-10, 4.53267e-11, 1.44619e-9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 kg (62 suppliers, which the file names only by identifier); sum of these 0.000276948 kg
- inorganic phosphorus fertiliser, as P2O5: 0.000103717, 4.80627e-10, 2.01513e-10, 1.71584e-8, 5.88621e-7, 2.19036e-10, 1.92752e-11, 2.25294e-11, 5.18176e-11, 1.79551e-6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 kg (62 suppliers, which the file names only by identifier); sum of these 0.000376644 kg
- inorganic potassium fertiliser, as K2O: 7.84173e-7, 7.38402e-9, 2.11811e-5, 1.89537e-7, 3.93424e-6, 9.36647e-8, 2.13093e-8, 1.4447e-8, 5.45776e-8, 1.89015e-8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 kg (29 suppliers, which the file names only by identifier); sum of these 5.70938e-5 kg
- irrigation: 4.31038e-5, 2.90505e-6, 1.7427e-6, 4.37043e-8, 7.78901e-6, 1.07066e-5, 0.000230103, 4.3509e-5, 1.69933e-6, 0.000102122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 m3 (16 suppliers, which the file names only by identifier); sum of these 0.00155399 m3
- isopropanol: 1.92495e-9 kg
- land use change, perennial crop: 5.41442e-8, 1.74563e-7, 2.41769e-7, 5.13396e-8 ha (4 suppliers, which the file names only by identifier); sum of these 5.21816e-7 ha
- lime: 7.09619e-5, 0.00156869 kg (2 suppliers, which the file names only by identifier); sum of these 0.00163965 kg
- liquefied petroleum gas: 6.12209e-7, 4.90895e-9, 3.11357e-9, 2.49538e-7, 7.31566e-9, 2.20551e-8, 1.04434e-6 kg (7 suppliers, which the file names only by identifier); sum of these 1.94348e-6 kg
- liquid manure spreading, by vacuum tanker: 4.33575e-7 m3
- lubricating oil: 2.78414e-7 kg
- maize starch: 1.51877e-10 kg
- mandarin: 0.075421 kg
- manganese(III) oxide: 2.24602e-6 kg
- mango: 0.000779799, 1.34909e-5 kg (2 suppliers, which the file names only by identifier); sum of these 0.00079329 kg
- manure, solid, cattle: 0.0006378 kg
- melamine formaldehyde resin: 6.53768e-6 kg
- methylene diphenyl diisocyanate: 1.17818e-6 kg
- mulberry leaves: 0.00964245 kg
- nickel, class 1: 4.13911e-8 kg
- nitrile-compound: 6.09978e-7 kg
- oil mill: 3.39203e-12 unit
- organophosphorus-compound, unspecified: 1.43993e-6 kg
- packaging, for fertilisers: 0.00740287 kg
- packaging, for pesticides: 4.81172e-5 kg
- paper, newsprint: 6.08191e-6, 1.83596e-5 kg (2 suppliers, which the file names only by identifier); sum of these 2.44415e-5 kg
- paper, woodfree, coated: 1.22738e-6 kg
- paraffin: 6.81981e-6 kg
- pesticide, unspecified: 1.0408e-8 kg
- petrol, unleaded, burned in machinery: 0.000198194 MJ
- phenolic resin: 7.39929e-6 kg
- phosphate rock, beneficiated: 5.20382e-7, 0.000196185, 1.52829e-6, 1.5256e-6 kg (4 suppliers, which the file names only by identifier); sum of these 0.000199759 kg
- phosphoric acid, industrial grade, without water, in 85% solution state: 3.13664e-6 kg
- planting tree: 0.000508458 unit
- polyethylene terephthalate, granulate, amorphous: 4.87485e-6 kg
- portafer: 8.31482e-7 kg
- potassium chloride: 0.000472249, 1.63032e-5 kg (2 suppliers, which the file names only by identifier); sum of these 0.000488552 kg
- potassium sulfate: 4.02669e-5, 0.000191512 kg (2 suppliers, which the file names only by identifier); sum of these 0.000231779 kg
- potato planting: 2.30881e-10 ha
- poultry manure, dried: 0.000256272 kg
- printing ink, offset, without solvent, in 47.5% solution state: 8.18545e-9 kg
- pulpwood, hardwood, measured as solid wood under bark: 2.44334e-7 m3
- pulpwood, softwood, measured as solid wood under bark: 9.9641e-7 m3
- rape oil, crude: 3.35703e-10, 4.7093e-7 kg (2 suppliers, which the file names only by identifier); sum of these 4.71266e-7 kg
- sawdust, wet, measured as dry mass: 4.4892e-7, 2.20091e-5 kg (2 suppliers, which the file names only by identifier); sum of these 2.2458e-5 kg
- sheet rolling, aluminium: 2.19868e-8 kg
- slab and siding, softwood, wet, measured as dry mass: 9.53783e-6, 3.69838e-5 kg (2 suppliers, which the file names only by identifier); sum of these 4.65217e-5 kg
- sodium chloride, powder: 5.53792e-9 kg
- sodium hydroxide, without water, in 50% solution state: 5.21741e-9 kg
- sodium metasilicate pentahydrate, 58% active substance, powder: 2.83194e-9, 5.88252e-9 kg (2 suppliers, which the file names only by identifier); sum of these 8.71446e-9 kg
- sodium percarbonate, powder: 3.28996e-9, 6.83393e-9 kg (2 suppliers, which the file names only by identifier); sum of these 1.01239e-8 kg
- solid manure loading and spreading, by hydraulic loader and spreader: 0.0011908 kg
- sowing: 3.30068e-8 ha
- soybean: 1.04778e-5, 1.44887e-5 kg (2 suppliers, which the file names only by identifier); sum of these 2.49666e-5 kg
- soybean, organic: 9.24822e-5 kg
- spent solvent mixture: -9.52379e-10, -3.72128e-10 kg (2 suppliers, which the file names only by identifier); sum of these -1.32451e-9 kg
- steam, in chemical industry: 3.32239e-5, 0.000188438 kg (2 suppliers, which the file names only by identifier); sum of these 0.000221661 kg
- sugar beet seed, for sowing: 6.93139e-8 kg
- sulfite: 1.12802e-6, 2.2841e-6 kg (2 suppliers, which the file names only by identifier); sum of these 3.41212e-6 kg
- synthetic rubber: 1.58058e-10 kg
- tap water: 2.22297e-6, 0.000151989, 5.41926e-6, 0.000624413, 1.01121e-5, 0.00156378, 3.55498e-6, 2.724e-5 kg (8 suppliers, which the file names only by identifier); sum of these 0.00238873 kg
- textile, woven cotton: 2.49007e-10 kg
- thermoforming of plastic sheets: 4.87485e-6 kg
- thermoforming, with calendering: 3.51436e-10 kg
- tillage, harrowing, by spring tine harrow: 6.6475e-8 ha
- tillage, ploughing: 3.32376e-8 ha
- transport, tractor and trailer, agricultural: 5.0935e-6, 4.50121e-9 metric ton*km (2 suppliers, which the file names only by identifier); sum of these 5.098e-6 metric ton*km
- trellis system, wooden poles, soft wood, tar impregnated: 3.1915e-6 ha
- triazine-compound, unspecified: 6.66734e-8 kg
- urea: 4.82201e-5, 0.000908973, 3.89105e-5, 0.000263258 kg (4 suppliers, which the file names only by identifier); sum of these 0.00125936 kg
- urea formaldehyde resin: 1.9643e-5 kg
- vegetable oil, refined: 2.46378e-6 kg
- waste emulsion paint: -2.27557e-10, -2.14505e-11 kg (2 suppliers, which the file names only by identifier); sum of these -2.49007e-10 kg
- waste paper, unsorted: -1.72186e-7, -1.72186e-7 kg (2 suppliers, which the file names only by identifier); sum of these -3.44372e-7 kg
- waste paperboard, unsorted: -3.89405e-8, -3.89405e-8 kg (2 suppliers, which the file names only by identifier); sum of these -7.7881e-8 kg
- waste wood, untreated: -1.01627e-6, -9.32471e-6, -0.00046072, -0.0022995, -5.89829e-6, -0.000176678, -0.000143964, -9.36045e-5 kg (8 suppliers, which the file names only by identifier); sum of these -0.0031907 kg
- wastewater from hard fibreboard production: -1.29276e-6 m3
- wastewater from medium density board production: -2.83927e-8 m3
- wastewater from particle board production: -2.59786e-8 m3
- wastewater from textile production: -5.04465e-7 m3
- wastewater from vegetable oil refinery: -4.02045e-9 m3
- wastewater, average: -1.84201e-9, -3.06519e-7, -7.32949e-8 m3 (3 suppliers, which the file names only by identifier); sum of these -3.81656e-7 m3
- white spirit: 2.69316e-9 kg
- willow stem cutting, for planting: 2.92673e-6, 1.90171e-7 unit (2 suppliers, which the file names only by identifier); sum of these 3.1169e-6 unit
- wood ash mixture, pure: -1.86784e-6 kg
- wood chips, dry, measured as dry mass: 0.000218403 kg
- wood chips, from post-consumer wood, measured as dry mass: 9.87789e-5 kg
- wood chips, wet, measured as dry mass: 1.71308e-8, 7.56071e-6 kg (2 suppliers, which the file names only by identifier); sum of these 7.57784e-6 kg
- wooden board factory, organic bonded boards: 3.86807e-14 unit
- zinc monosulfate: 2.14857e-6, 4.06719e-7 kg (2 suppliers, which the file names only by identifier); sum of these 2.55529e-6 kg

## Inputs from nature
- Carbon dioxide, in air [natural resource, in air]: 0.0157813 kg
- Energy, gross calorific value, in biomass [natural resource, biotic]: 0.0826118 MJ
- Occupation, annual crop, non-irrigated, intensive [natural resource, land]: 0.000197699 m2*year
- Occupation, industrial area [natural resource, land]: 1.68266e-9 m2*year
- Occupation, permanent crop, irrigated [natural resource, land]: 0.0320012 m2*year
- Transformation, from annual crop, non-irrigated, intensive [natural resource, land]: 0.000332375 m2
- Transformation, from permanent crop, irrigated [natural resource, land]: 0.00159575 m2
- Transformation, to annual crop, non-irrigated, intensive [natural resource, land]: 0.000332375 m2
- Transformation, to permanent crop, irrigated [natural resource, land]: 0.00159575 m2
- Water, cooling, unspecified natural origin [natural resource, in water]: 1.34702e-6 m3
- Water, river [natural resource, in water]: 2.25328e-8 m3
- Water, unspecified natural origin [natural resource, in ground]: 4.12626e-5 m3
- Water, unspecified natural origin [natural resource, in water]: 1.04392e-5 m3
- Water, well, in ground [natural resource, in water]: 1.34079e-6 m3

## Emissions to nature
- 2-Propanol [air, urban air close to ground]: 1.92495e-9 kg
- Acetaldehyde [air, unspecified]: 4.95458e-10 kg
- Acetaldehyde [air, urban air close to ground]: 2.02734e-10 kg
- Ammonia [air, non-urban air or from high stacks]: 0.000194918 kg
- Ammonia [air, unspecified]: 4.97605e-9 kg
- Ammonia [air, urban air close to ground]: 1.84585e-9 kg
- Arsenic ion [air, unspecified]: 2.87633e-12 kg
- Arsenic ion [air, urban air close to ground]: 1.06696e-12 kg
- Benzene [air, unspecified]: 2.61746e-9 kg
- Benzene [air, urban air close to ground]: 9.70938e-10 kg
- Benzene, ethyl- [air, unspecified]: 8.629e-11 kg
- Benzene, ethyl- [air, urban air close to ground]: 1.17572e-10 kg
- Benzene, hexachloro- [air, unspecified]: 2.07096e-17 kg
- Benzene, hexachloro- [air, urban air close to ground]: 7.68215e-18 kg
- Benzo(a)pyrene [air, unspecified]: 1.43817e-12 kg
- Benzo(a)pyrene [air, urban air close to ground]: 5.33482e-13 kg
- Bromine [air, unspecified]: 1.7258e-10 kg
- Bromine [air, urban air close to ground]: 6.40179e-11 kg
- Cadmium II [air, unspecified]: 2.01343e-12 kg
- Cadmium II [air, urban air close to ground]: 7.46875e-13 kg
- Calcium [air, unspecified]: 1.68265e-8 kg
- Calcium [air, urban air close to ground]: 6.24174e-9 kg
- Carbon dioxide, fossil [air, low population density, long-term]: 5.86189e-6 kg
- Carbon dioxide, fossil [air, non-urban air or from high stacks]: 0.00165507 kg
- Carbon dioxide, from soil or biomass stock [air, non-urban air or from high stacks]: 0.00178397 kg
- Carbon dioxide, non-fossil [air, unspecified]: 0.000307767 kg
- Carbon dioxide, non-fossil [air, urban air close to ground]: 0.00816664 kg
- Carbon monoxide, non-fossil [air, unspecified]: 8.629e-7 kg
- Carbon monoxide, non-fossil [air, urban air close to ground]: 2.13393e-7 kg
- Chlorine [air, unspecified]: 5.1774e-10 kg
- Chlorine [air, urban air close to ground]: 1.92054e-10 kg
- Chromium III [air, unspecified]: 1.13903e-11 kg
- Chromium III [air, urban air close to ground]: 4.22518e-12 kg
- Chromium VI [air, unspecified]: 1.15053e-13 kg
- Chromium VI [air, urban air close to ground]: 4.26786e-14 kg
- Copper ion [air, unspecified]: 6.32793e-11 kg
- Copper ion [air, urban air close to ground]: 2.34732e-11 kg
- Dinitrogen monoxide [air, low population density, long-term]: 3.71594e-10 kg
- Dinitrogen monoxide [air, non-urban air or from high stacks]: 2.30172e-5 kg
- Dinitrogen monoxide [air, unspecified]: 6.61556e-9 kg
- Dinitrogen monoxide [air, urban air close to ground]: 2.45402e-9 kg
- Dioxins, measured as 2,3,7,8-tetrachlorodibenzo-p-dioxin [air, unspecified]: 8.91663e-17 kg
- Dioxins, measured as 2,3,7,8-tetrachlorodibenzo-p-dioxin [air, urban air close to ground]: 3.27821e-17 kg
- Fluorine [air, unspecified]: 1.43817e-10 kg
- Fluorine [air, urban air close to ground]: 5.33482e-11 kg
- Formaldehyde [air, unspecified]: 1.8287e-8 kg
- Formaldehyde [air, urban air close to ground]: 4.34281e-8 kg
- Heptane [air, urban air close to ground]: 8.37088e-10 kg
- Hexane [air, urban air close to ground]: 1.63563e-6 kg
- Hydrocarbons, aliphatic, alkanes, unspecified [air, unspecified]: 2.61746e-9 kg
- Hydrocarbons, aliphatic, alkanes, unspecified [air, urban air close to ground]: 9.70938e-10 kg
- Hydrocarbons, aliphatic, unsaturated [air, unspecified]: 8.91663e-9 kg
- Hydrocarbons, aliphatic, unsaturated [air, urban air close to ground]: 3.30759e-9 kg
- Lead II [air, unspecified]: 7.19083e-11 kg
- Lead II [air, urban air close to ground]: 2.66741e-11 kg
- Magnesium [air, unspecified]: 1.03548e-9 kg
- Magnesium [air, urban air close to ground]: 3.84107e-10 kg
- Manganese II [air, unspecified]: 4.88976e-10 kg
- Manganese II [air, urban air close to ground]: 1.81384e-10 kg
- Mercury II [air, unspecified]: 8.629e-13 kg
- Mercury II [air, urban air close to ground]: 3.20089e-13 kg
- Methane, fossil [air, low population density, long-term]: 8.36086e-11 kg
- Methane, non-fossil [air, unspecified]: 8.629e-9 kg
- Methane, non-fossil [air, urban air close to ground]: 1.60045e-9 kg
- Methanol [air, non-urban air or from high stacks]: 7.73204e-9 kg
- Methanol [air, unspecified]: 1.67537e-8 kg
- Methanol [air, urban air close to ground]: 8.83004e-11 kg
- NMVOC, non-methane volatile organic compounds [air, unspecified]: 4.68048e-7 kg
- NMVOC, non-methane volatile organic compounds [air, urban air close to ground]: 1.76268e-7 kg
- Nickel II [air, unspecified]: 1.7258e-11 kg
- Nickel II [air, urban air close to ground]: 6.40179e-12 kg
- Nitrogen oxides [air, non-urban air or from high stacks]: 3.97309e-5 kg
- Nitrogen oxides [air, unspecified]: 6.47175e-7 kg
- Nitrogen oxides [air, urban air close to ground]: 2.09213e-7 kg
- PAH, polycyclic aromatic hydrocarbons [air, unspecified]: 3.19273e-11 kg
- PAH, polycyclic aromatic hydrocarbons [air, urban air close to ground]: 1.18433e-11 kg
- Particulate Matter, < 2.5 um [air, unspecified]: 1.29435e-7 kg
- Particulate Matter, < 2.5 um [air, urban air close to ground]: 2.00625e-8 kg
- Particulate Matter, > 10 um [air, unspecified]: 1.29824e-7 kg
- Particulate Matter, > 2.5 um and < 10um [air, unspecified]: 7.19083e-9 kg
- Phenol, pentachloro- [air, unspecified]: 2.32983e-14 kg
- Phenol, pentachloro- [air, urban air close to ground]: 8.64242e-15 kg
- Phosphorus [air, unspecified]: 8.629e-10 kg
- Phosphorus [air, urban air close to ground]: 3.20089e-10 kg
- Potassium I [air, unspecified]: 6.73062e-8 kg
- Potassium I [air, urban air close to ground]: 2.4967e-8 kg
- Propylene oxide [air, urban air close to ground]: 1.60707e-10 kg
- Sodium [air, unspecified]: 3.73923e-9 kg
- Sodium [air, urban air close to ground]: 1.38705e-9 kg
- Sulfur dioxide [air, unspecified]: 7.19083e-9 kg
- Sulfur dioxide [air, urban air close to ground]: 2.66741e-9 kg
- Toluene [air, unspecified]: 8.629e-10 kg
- Toluene [air, urban air close to ground]: 3.95675e-10 kg
- Water [air, non-urban air or from high stacks]: 0.000943573 m3
- Water [air, unspecified]: 5.3564e-7 m3
- Xylene [air, urban air close to ground]: 7.55852e-11 kg
- Zinc II [air, unspecified]: 8.629e-10 kg
- Zinc II [air, urban air close to ground]: 3.20089e-10 kg
- m-Xylene [air, unspecified]: 3.4516e-10 kg
- m-Xylene [air, urban air close to ground]: 1.28036e-10 kg
- Azoxystrobin [soil, agricultural]: 6.09978e-7 kg
- Cadmium II [soil, agricultural]: 4.7741e-8 kg
- Chlorothalonil [soil, agricultural]: 2.31046e-9 kg
- Chlorpyrifos methyl [soil, agricultural]: 9.65792e-8 kg
- Chromium III [soil, agricultural]: 4.9379e-7 kg
- Copper ion [soil, agricultural]: 2.28571e-6 kg
- Cyproconazole [soil, agricultural]: 1.01581e-6 kg
- Diflufenican [soil, agricultural]: 3.46322e-11 kg
- Ethofumesate [soil, agricultural]: 1.74935e-8 kg
- Fenpropimorph [soil, agricultural]: 4.95099e-9 kg
- Flurtamone [soil, agricultural]: 8.65805e-11 kg
- Fungicides, unspecified [soil, agricultural]: 8.35068e-10 kg
- Glyphosate [soil, agricultural]: 7.1555e-7 kg
- Hexaconazole [soil, agricultural]: 2.67924e-7 kg
- Lead II [soil, agricultural]: 1.58582e-7 kg
- Mercury II [soil, agricultural]: 9.02982e-10 kg
- Metaldehyde [soil, agricultural]: 2.64054e-9 kg
- Metamitron [soil, agricultural]: 6.66734e-8 kg
- Nickel II [soil, agricultural]: 7.04145e-8 kg
- Paraquat [soil, agricultural]: 1.04949e-6 kg
- Phenmedipham [soil, agricultural]: 1.22124e-8 kg
- Pyraclostrobin [soil, agricultural]: 4.8732e-7 kg
- Terbufos [soil, agricultural]: 1.34335e-6 kg
- Thiamethoxam [soil, agricultural]: 8.122e-7 kg
- Zinc II [soil, agricultural]: 7.08716e-7 kg
- BOD5, Biological Oxygen Demand [water, ground-]: 0.00229075 kg
- BOD5, Biological Oxygen Demand [water, surface water]: 3.22812e-7 kg
- COD, Chemical Oxygen Demand [water, ground-]: 0.00458151 kg
- COD, Chemical Oxygen Demand [water, surface water]: 5.00705e-7 kg
- Cadmium II [water, ground-]: 1.43252e-10 kg
- Cadmium II [water, surface water]: 6.34442e-10 kg
- Calcium II [water, surface water]: 5.45016e-10 kg
- Carbonate [water, surface water]: 5.2886e-9 kg
- Chloride [water, surface water]: 1.09002e-7 kg
- Chlorine [water, surface water]: 6.77692e-9 kg
- Chromium III [water, ground-]: 6.58309e-8 kg
- Chromium III [water, surface water]: 5.99723e-8 kg
- Copper ion [water, ground-]: 1.15343e-8 kg
- Copper ion [water, surface water]: 8.88098e-8 kg
- DOC, Dissolved Organic Carbon [water, ground-]: 0.00169685 kg
- DOC, Dissolved Organic Carbon [water, surface water]: 1.85446e-7 kg
- Dissolved solids [water, surface water]: 9.09744e-7 kg
- Lead II [water, ground-]: 1.04392e-9 kg
- Lead II [water, surface water]: 3.12425e-8 kg
- Mercury II [water, ground-]: 1.31617e-10 kg
- Mercury II [water, surface water]: 1.41211e-10 kg
- Nickel II [water, ground-]: 3.84438e-11 kg
- Nickel II [water, surface water]: 4.38925e-8 kg
- Nitrate [water, ground-]: 0.00127765 kg
- Nitrogen [water, surface water]: 9.28574e-8 kg
- Oils, non-fossil [water, surface water]: 1.5931e-7 kg
- Phosphate [water, ground-]: 5.92764e-7 kg
- Phosphate [water, surface water]: 3.31754e-6 kg
- Phosphorus [water, surface water]: 1.57037e-6 kg
- Sodium [water, unspecified]: 3.4672e-9 kg
- Sulfur [water, surface water]: 1.46902e-9 kg
- Suspended solids, unspecified [water, surface water]: 3.73121e-7 kg
- TOC, Total Organic Carbon [water, ground-]: 0.00169685 kg
- TOC, Total Organic Carbon [water, surface water]: 1.85446e-7 kg
- Water [water, ground-]: 0.000121962 m3
- Water [water, surface water]: 0.00054112 m3
- Zinc II [water, ground-]: 7.15661e-8 kg
- Zinc II [water, surface water]: 1.07332e-7 kg

## Sampling procedure
Data come from composting plants in Switzerland. The material contents for compost are based on mass spectrometry analyses.

## Review by Gabor Doka 2016-03-07
Passed. It was not possible to construct a correct carbon balance, as the carbon content property of the compost exchange could not be changed. So although the author had pertinent and more accurate information, it was not possible to enter it. With this behaviour we will never be able to make carbon balances work in the DB.(unless we fill up the DB with unnecessary multiples of exchanges and markets for each slightly differening exchange from (or for) various processes).
Exchanges contain new "concentration" properties, which seem to want to fulfill the same function as the already established "content" properties. This duplication of functionality (from whomever it originated) seems not sensible to me. It was not possible to remove the concentration properties. but they were set to zero.
