# treatment of wastewater from pig iron production, wastewater treatment

Dataset: EcoSpold 2, unit process
Geography: RoW
Time period: 2010-01-01 to 2022-12-31
Technology level: current
Classification: ISIC rev.4 ecoinvent: 3700:Sewerage
Scenario: Business-as-Usual
System model: Allocation at the point of substitution
Generated by: Nikolia Stoikou
Database: ecoinvent
isCopyrightProtected: true

## General comment
This dataset represents the treatment of a wastewater, generated from an ordinary transforming activity. Purification in wastewater treatment of 'wastewater from pig iron production'. Recommended use of this dataset: to be used for wastewaters, generated from ordinary transforming activities, of equal or similar composition. The wastewater has a content of TOC: 0.0000041 kg/m3, COD: 0.00002 kg/m3 and BOD: 0.00001 kg/m3. TOC is equal to C present in the wastewater, COD is calculated as TOC/0.2565 and BOD is calculated as COD/0.53034. Detailed elemental composition can be found in the properties of the wastewater treated. Share of biogenic carbon in the sludge: 0%.

## Included activities start
The activity starts with the wastewater being available at the gate of the treatment facility. Collection and transportation of the wastewater to the treatment plant is not included.

## Included activities end
The activity ends with the wastewater being treated and waste-specific emissions released to the environment. Expenditures from treatment of wastewater in waste treatment plant are included as well as relevant infrastructure of the plant. Emissions from any sludge digestion, biogas generation and utilization (heeding specific wastewater composition) are also included. Waste-specific direct emissions of untreated wastewater and required territory-specific infrastructure for sewers are not contained within this dataset but instead in the regional market datasets for this wastewater.

## Geography
The site has mean annual temperature (MAT) of 16.743579766537 degC, mean annual precipitation (MAP) of 1250.84108527132 mm/year, mean annual actual evaporation (EAT) of 460.58904958214 mm/year. In the WWT plant, 0% of its water input are lost due to evaporation from pools, 0.000000202% of water is *gained* from organic mass degradation, and 0.00000169% is removed off site via sludge disposal. (References: UN data, 2020. Precipitation, Environment Statistics Database, United Nations Statistics Division Available at: http://data.un.org/Data.aspx?q=precipitation&d=ENV&f=variableID%3a6; World Bank, 2022. Surface area (sq.km), World Bank Group Available at: https://data.worldbank.org/indicator/AG.SRF.TOTL.K2; Doka G.,2021. A model for composition-specific life cycle inventories of regionalised wastewater fates, Zurich, Switzerland. http://www.doka.ch/publications.htm)

## Technology
This is an inventory for the disposal of a selected wastewater in Global. The reference unit is 1 m3 wastewater input. This activity represents the treatment of a specific wastewater in a WWT plant (while direct emissions and sewering are heeded in the upstream market dataset for this wastewater). The size of the treatment plant infrastructure is for a supranational region average territory situation. The assumed size of the WWTP treats 82.2 Mio m3 per year. The mixture of WWTP with one, two, or three stages is 8.2%-41.2%-50.6%. The actual, waste-specific oxygen requirement in the biological stages is 0.000001726845 kg O. The digestion process produces 0.00043310375 litres of biogas with an energy content of 0.00000983646MJ. 60.5% of the biogas is utilized for energy. The remainder is flared. The gross electric efficiency is 26.564%. The gross thermal efficiency is 47.853%. After digestion, the remaining total sludge mass (dry matter) is 0.00002336kg DM.

## Reference product
- iron scrap, sorted, pressed: 1 kg; By-product classification Recyclable; CPC 39310: Slag, dross, scalings and other waste from the manufacture of iron or steel; lognormal variance with pedigree 0.3611, pedigree (1,1,1,1,1)
  scrap output from used infrastructure for wastewater treatment plant.
  Uncertainty: Uncertainty calculated from wastewater technosphere fate uncertainty and treatment infrastructure uncertainty.
  production volume 262343 kg
    Calculated in proportion to wastewater reference product.
  property price 0.175 EUR2005
    Temporary price data. Calculated as 90% of purchasers price based on: 2005 import and export prices (total trades (USD) divided by total weight (kg) in biggest economies of the world: EU27, USA, Brasil, China, India, Japan and Russia) from UN Commodity Trade Statistics Database (http://data.un.org/Explorer.aspxDatabase [Accessed 2011.06.20]). Commodity: Waste or scrap, of cast iron
  properties: carbon allocation 0 kg, carbon content 0, carbon content, fossil 0, carbon content, non-fossil 0, dry mass 1 kg, water content 0, water in wet mass 0 kg, wet mass 1 kg

## Inputs from technosphere
- aluminium oxide factory: 1.89579e-12 unit
- aluminium, wrought alloy: 2.05489e-6 kg
- argon, liquid: 2.73589e-6 kg
- basic oxygen furnace dust: -0.0024067, -0.00378039 kg (2 suppliers, which the file names only by identifier); sum of these -0.00618709 kg
- basic oxygen furnace dust, for recovery: 0.000650514 kg
- basic oxygen furnace secondary metallurgy slag: -9.59515e-5 kg
- basic oxygen furnace secondary metallurgy slag, for recovery: 3.63044e-6 kg
- basic oxygen furnace slag: -0.0334611 kg
- basic oxygen furnace slag, for recovery: 0.000911824 kg
- basic oxygen furnace sludge: -9.59515e-5 kg
- basic oxygen furnace sludge, for recovery: 1.01834e-5 kg
- basic oxygen furnace waste: -7.83745e-5 kg
- blast furnace: 9.97825e-13 unit
- blast furnace dust: -0.000553719 kg
- blast furnace dust, for recovery: 0.000443886 kg
- blast furnace gas: -0.0548823 MJ
- blast furnace slag: -0.0185341 kg
- blast furnace sludge: -0.000282521, -0.00152961 kg (2 suppliers, which the file names only by identifier); sum of these -0.00181213 kg
- blast furnace sludge, for recovery: 0.00032113 kg
- blast oxygen furnace converter: 4.25306e-12 unit
- blasting: 7.48067e-8 kg
- calcium carbide, technical grade: 4.46047e-6 kg
- chemical, organic: 2.3273e-6 kg
- coke: 0.736941 MJ
- compressed air, 600 kPa gauge: 0.00460051 m3
- compressed air, 800 kPa gauge: 0.000143881 m3
- conveyor belt: 2.69033e-11 m
- copper, cathode: 1.86808e-8 kg
- diesel: 2.39384e-6, 3.18581e-9, 6.50962e-10, 4.50373e-10, 6.34899e-8, 1.53155e-10 kg (6 suppliers, which the file names only by identifier); sum of these 2.46178e-6 kg
- diesel, burned in building machine: 0.000155901 MJ
- dolomite: 0.00162061 kg
- electric arc furnace secondary metallurgy slag, for recovery: 9.12137e-5 kg
- electric arc furnace slag, for recovery: 0.000113716 kg
- electricity, medium voltage: 7.13251e-6, 9.6307e-6, 1.38508e-5, 2.89125e-6, 0.00016935, 0.0042819, 9.14626e-6, 3.42497e-6, 4.32203e-5, 0.00133609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 kWh (46 suppliers, which the file names only by identifier); sum of these 0.0190697 kWh
- electrode, negative, Ni: 1.21425e-7 kg
- ferromanganese, high-coal, 74.5% Mn: 0.00213095 kg
- ferronickel: 0.00105259 kg
- ferrosilicon: 1.78147e-7 kg
- graphite: 4.52605e-6 kg
- hard coal: 0.00601296, 0.0012064, 0.000547022, 0.00387141, 0.000558224, 0.000815546, 0.000237391, 0.000129804 kg (8 suppliers, which the file names only by identifier); sum of these 0.0133788 kg
- heat, district or industrial, natural gas: 0.000103836 MJ
- heat, district or industrial, other than natural gas: 0.000705223, 0.00176308 MJ (2 suppliers, which the file names only by identifier); sum of these 0.0024683 MJ
- industrial machine, heavy, unspecified: 5.9226e-9 kg
- inert waste: -2.81441e-6 kg
- inert waste, for final disposal: -0.00422128 kg
- iron ore concentrate: 0.0742061, 0.00813978 kg (2 suppliers, which the file names only by identifier); sum of these 0.0823458 kg
- iron pellet: 0.01935, 0.0196421 kg (2 suppliers, which the file names only by identifier); sum of these 0.0389921 kg
- iron scrap, sorted, pressed: 0.0732628 kg
- iron sinter: 0.0114833, 0.0515605 kg (2 suppliers, which the file names only by identifier); sum of these 0.0630438 kg
- lime: 5.38347e-5 kg
- lime, hydrated, loose weight: 0.00200196 kg
- limestone, unprocessed: 3.33265e-5, 0.0104326 kg (2 suppliers, which the file names only by identifier); sum of these 0.0104659 kg
- liquefied petroleum gas: 1.51675e-8, 1.05979e-9, 1.57937e-9, 4.76146e-9, 2.25462e-7 kg (5 suppliers, which the file names only by identifier); sum of these 2.4803e-7 kg
- manganese: 4.75512e-7 kg
- mill scale: -2.11489e-5 kg
- mine infrastructure, open cast, ilmenite from hard-rock ore: 1.48883e-14 unit
- molybdenite: 1.39524e-5 kg
- natural gas, high pressure: 5.42194e-6, 2.28862e-6, 1.31075e-5, 3.88982e-6, 0.00022005, 2.24909e-5, 2.45506e-6, 7.24454e-8, 8.71755e-6, 9.15447e-6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 m3 (24 suppliers, which the file names only by identifier); sum of these 0.000658014 m3
- nickel, class 1: 1.3654e-8 kg
- nitrogen, liquid: 0.00107513 kg
- non-sulfidic tailing, off-site: -0.00492071 kg
- oxygen, liquid: 0.0261062 kg
- petrol, unleaded, burned in machinery: 5.4979e-8 MJ
- petroleum coke: 3.39623e-5 kg
- pig iron: 0.275881 kg
- pitch: 1.88755e-5 kg
- propane: 2.92949e-7 kg
- quicklime, in pieces, loose: 0.0150747 kg
- recultivation, ilmenite mine: 4.01227e-8 m2
- refractory, fireclay, packed: 9.82106e-5 kg
- sponge iron: 1.82563e-5, 4.36864e-8 kg (2 suppliers, which the file names only by identifier); sum of these 1.82999e-5 kg
- steam, in chemical industry: 0.00181844 kg
- transport, freight, lorry, unspecified: 2.11319e-5 metric ton*km
- wastewater from pig iron production: -0.000466352 m3
- wastewater, average: -1.6629e-9, -4.67056e-7 m3 (2 suppliers, which the file names only by identifier); sum of these -4.68719e-7 m3

## Inputs from nature
- Gangue [natural resource, in ground]: 0.00404212 kg
- Iron [natural resource, in ground]: 0.00155174 kg
- Occupation, mineral extraction site [natural resource, land]: 1.20368e-6 m2*year
- Oxygen [natural resource, in air]: 0.00896566 kg
- Titanium [natural resource, in ground]: 0.000275048 kg
- Transformation, from forest, unspecified [natural resource, land]: 4.01227e-8 m2
- Transformation, to mineral extraction site [natural resource, land]: 4.01227e-8 m2
- Water, cooling, unspecified natural origin [natural resource, in water]: 0.00189432 m3
- Water, unspecified natural origin [natural resource, in ground]: 3.30818e-5 m3
- Water, unspecified natural origin [natural resource, in water]: 2.98374e-5 m3

## Emissions to nature
- Arsenic ion [air, unspecified]: 2.27495e-10 kg
- Benzo(a)pyrene [air, unspecified]: 1.54481e-10 kg
- Cadmium II [air, unspecified]: 5.64119e-10 kg
- Carbon dioxide, fossil [air, unspecified]: 0.0988809 kg
- Carbon monoxide, fossil [air, non-urban air or from high stacks]: 0.00010663 kg
- Carbon monoxide, fossil [air, unspecified]: 0.00200391 kg
- Chromium III [air, unspecified]: 1.03451e-8 kg
- Copper ion [air, unspecified]: 4.68e-8 kg
- Dioxins, measured as 2,3,7,8-tetrachlorodibenzo-p-dioxin [air, unspecified]: 1.38018e-13 kg
- Heat, waste [air, unspecified]: 0.0652956 MJ
- Hydrochloric acid [air, unspecified]: 2.61222e-6 kg
- Hydrogen fluoride [air, unspecified]: 1.37337e-7 kg
- Hydrogen sulfide [air, unspecified]: 8.04143e-7 kg
- Iron ion [air, unspecified]: 1.31263e-5 kg
- Lead II [air, unspecified]: 1.64524e-7 kg
- Manganese II [air, unspecified]: 2.27042e-7 kg
- Mercury II [air, unspecified]: 3.45013e-10 kg
- Methane, fossil [air, unspecified]: 9.1765e-6 kg
- NMVOC, non-methane volatile organic compounds [air, unspecified]: 1.50015e-6 kg
- Nickel II [air, unspecified]: 2.33994e-9 kg
- Nitrogen oxides [air, unspecified]: 5.50705e-5 kg
- PAH, polycyclic aromatic hydrocarbons [air, unspecified]: 4.01481e-9 kg
- Particulate Matter, < 2.5 um [air, non-urban air or from high stacks]: 8.58486e-9 kg
- Particulate Matter, < 2.5 um [air, unspecified]: 2.55536e-5 kg
- Particulate Matter, > 10 um [air, non-urban air or from high stacks]: 1.16816e-7 kg
- Particulate Matter, > 10 um [air, unspecified]: 7.2306e-6 kg
- Particulate Matter, > 2.5 um and < 10um [air, non-urban air or from high stacks]: 4.62969e-8 kg
- Particulate Matter, > 2.5 um and < 10um [air, unspecified]: 1.60591e-6 kg
- Polychlorinated biphenyls [air, unspecified]: 5.00776e-12 kg
- Selenium IV [air, unspecified]: 3.88662e-9 kg
- Sulfur dioxide [air, unspecified]: 4.50343e-5 kg
- Titanium ion [air, unspecified]: 4.98993e-10 kg
- Vanadium V [air, unspecified]: 7.39505e-10 kg
- Water [air, non-urban air or from high stacks]: 8.59341e-7 m3
- Water [air, unspecified]: 0.00198239 m3
- Water [water, unspecified]: 4.76447e-5 m3
