# heat production, at heat pump 30kW, allocation exergy

Dataset: EcoSpold 2, unit process
Geography: Europe without Switzerland
Time period: 1990-01-01 to 2022-12-31
Technology level: current
Classification: EcoSpold01Categories: heat pumps/heating systems
Classification: ISIC rev.4 ecoinvent: 3530:Steam and air conditioning supply
Scenario: Business-as-Usual
System model: Allocation at the point of substitution
Share of production covered: 0 %
Generated by: [System]
Published in: Heck, T. 2007
Database: ecoinvent
isCopyrightProtected: true

## General comment
Dataset copied from Switzerland. Heat from 30 kW heat pump installed at 160kW cogeneration unit.
[This dataset was already contained in the ecoinvent database version 2. It was not individually updated during the transfer to ecoinvent version 3. Life Cycle Impact Assessment results may still have changed, as they are affected by changes in the supply chain, i.e. in other datasets. This dataset was generated following the ecoinvent quality guidelines for version 2. It may have been subject to central changes described in the ecoinvent version 3 change report (http://www.ecoinvent.org/database/ecoinvent-version-3/reports-of-changes/), and the results of the central updates were reviewed extensively. The changes added e.g. consistent water flows and other information throughout the database. The documentation of this dataset can be found in the ecoinvent reports of version 2, which are still available via the ecoinvent website. The change report linked above covers all central changes that were made during the conversion process.]

## Included activities end
Includes heat pump infrastructure, electricity from cogeneration unit, and refrigerant R134a emissions during operation.

## Geography
Could be used for European conditions.

## Reference product
- heat, central or small-scale, other than natural gas: 1 MJ; By-product classification allocatable product; CPC 17300: Steam and hot water
  EcoSpold01Location=CH
  production volume 1.35e10 MJ
    Assumption. Total heat from geothermal sources in Europe amounted to 12473 TJ in 2009 according to IEA statistics. In order to model the corresponding share of 1.1% on the heat market, this value had to be adapted. See talk pages for further discussion of the modelling of the heat markets.
    http://www.iea.org/stats/electricitydata.asp?COUNTRY_CODE=25
  property price 0.0106 EUR2005
    Average European district heat price from Ecoheatcool and Euroheat 2005-2006, Ecoheat Work package 1: The European heat market. Final report. 10.6 EUR/GJ i s the price of district heat. http://www.solarthermalworld.org/files/Ecoheatcool%20WP1%20Web.pdf?download
  properties: carbon allocation 0 kg, carbon content 0, heating value, net 1 MJ

## Inputs from technosphere
- electricity, low voltage: 0.0617 kWh; lognormal variance with pedigree 0.05, pedigree (1,1,5,1,1)
  Seasonal Performance Factor, data from operators; uncertainty from range of Coefficient of Performance.
  EcoSpold01Location=CH
- heat pump, 30kW: 3.47e-8 unit; lognormal variance with pedigree 0.08, pedigree (1,1,5,1,1)
  EcoSpold01Location=RER
  uncertainty of life time

## Emissions to nature
- Ethane, 1,1,1,2-tetrafluoro-, HFC-134a [air, urban air close to ground]: 3.93e-7 kg; lognormal variance with pedigree 0.11, pedigree (1,1,5,1,1)
  estimated from range of values in literature

## Sampling procedure
Literature, manufacturer information

## Extrapolations
none This dataset has been copied from an original dataset covering the geography CH. The uncertainty has been adjusted accordingly.
