# operation, computer, laptop, 68% active work

Dataset: EcoSpold 2, unit process
Geography: CA-QC
Time period: 2005-01-01 to 2022-12-31
Technology level: current
Classification: EcoSpold01Categories: electronics/services
Classification: ISIC rev.4 ecoinvent: 8219:Photocopying, document preparation and other specialized office support act
Synonyms: Heimarbeit
Tags: Operation; Recontextualization
Scenario: Business-as-Usual
System model: Allocation at the point of substitution
Generated by: Pascal Lesage
Published in: Spielmann M. 2007
Database: ecoinvent
isCopyrightProtected: true

## General comment
The data set represents the use of a laptop computer during work at home.
[This dataset was already contained in the ecoinvent database version 2. It was not individually updated during the transfer to ecoinvent version 3. Life Cycle Impact Assessment results may still have changed, as they are affected by changes in the supply chain, i.e. in other datasets. This dataset was generated following the ecoinvent quality guidelines for version 2. It may have been subject to central changes described in the ecoinvent version 3 change report (http://www.ecoinvent.org/database/ecoinvent-version-3/reports-of-changes/), and the results of the central updates were reviewed extensively. The changes added e.g. consistent water flows and other information throughout the database. The documentation of this dataset can be found in the ecoinvent reports of version 2, which are still available via the ecoinvent website. The change report linked above covers all central changes that were made during the conversion process.]
Child dataset exchanges identical to GLO dataset. Created to enable linking to regional markets (e.g. for electricity). Data quality indicators adjusted accordingly.

## Included activities end
This data set includes the use of a laptop and the energy consumption for working at home. It includes the laptop production, transport from plant to customer and electricity consumption (from consumer mix) for average office work.

## Geography
Data for Swiss conditions
Child dataset exchanges identical to GLO dataset. Created to enable linking to regional markets (e.g. for electricity). Data quality indicators adjusted accordingly.

## Technology
Work at home using an average laptop computer with 68% active mode, 25%standby mode and 6% off mode

## Parameters
- Quebec gross domestic product 2011: 3.11e11 USD(2011); name quebecGDP2011; lognormal variance with pedigree 0.0006, pedigree (1,1,1,1,1)
  Quebec Gross domestic product for 2011, expressed in 2011 USD. Source: Institut de la statistique du Québec. Converted from CAD to USD using a yearly average exchange rate of 0.989 CAD/USD (Source: bank of Canada).
- world gross domestic product 2011: 7e13 USD(2011); name worldGDP2011; lognormal variance with pedigree 0.0006, pedigree (1,1,1,1,1)
  World Gross domestic product for 2011, expressed in 2011 USD. Source: World Bank.

## Reference product
- operation, computer, laptop, 68% active work: 1 hour; By-product classification allocatable product; CPC 85: Support services
  production volume 0.0177714 hour
    Gross approximation of Quebec production volume using relative value of Quebec GDP to world GDP
  property price 0.117738 EUR2005
    Calculated based on inputs: The price of the product has been calculated as a sum of the values of the material and energy inputs for this product. This value is therefore a rough estimation. It may underestimate the real price since there are additional expenses when producing any product. These expences can include for example labour costs, treatment of waste materials and profit for the producer. Please consider carefully whether this level of data quality is acceptable for your application.
  properties: carbon allocation 0 kg, carbon content 0

## Inputs from technosphere
- computer, laptop: 0.00013514 unit; lognormal variance with pedigree 0.0432, pedigree (2,3,5,5,1)
  Lifttime: 4 years and 1850 hours
  Uncertainty: l
  properties: carbon content, fossil 0.257799, carbon content, non-fossil 1.2662e-5, dry mass 3.15 kg, wet mass 3.15 kg
  note on carbon content, fossil: Calculated as the addition of C contents in the product composition, then referred to 1 kg DM
- electricity, low voltage: 0.014187 kWh; lognormal variance with pedigree 0.0427, pedigree (2,2,5,5,1)
  According to ecoinvent report no. 18: 12.75% ff: 2W, 25%standby: 4W, 68.75% active:19W, 100%video: 30W
  Uncertainty: a

## Extrapolations
Average technology This dataset has been copied from an original dataset covering the geography CH. The uncertainty has been adjusted accordingly. Child dataset exchanges identical to GLO dataset. Created to enable linking to regional markets (e.g. for electricity). Data quality indicators adjusted accordingly.
