# treatment of sewage sludge, 75% water, WWT, WW from liquid crystal production, sanitary landfill

Dataset: EcoSpold 2, unit process
Geography: GLO
Time period: 1994-01-01 to 2022-12-31
Technology level: current
Classification: ISIC rev.4 ecoinvent: 3821:Treatment and disposal of non-hazardous waste
Scenario: Business-as-Usual
System model: Allocation at the point of substitution
Generated by: Nikolia Stoikou
Database: ecoinvent
isCopyrightProtected: true

## General comment
The process represents the treatment of a waste (sewage sludge) that is exclusively generated from another waste treatment. Sewage sludge is generated in the wastewater treatment of 'wastewater from liquid crystal production'. Recommended use of this dataset: to be used within the specific chain of treatments for 'wastewater from liquid crystal production'. Share of biogenic carbon in the sludge: 0%. Landfill gas capture and utilisation generates 0.03321 kWh of electricity and 0.0599 MJ of useful heat. 0.002598 kg waste mass remains in the landfill even after the long term period.

## Included activities start
The activity starts with the waste being available at the gate of the treatment facility. Collection and transportation of the waste to the treatment plant is not included.

## Included activities end
The activity ends with the waste being treated and waste-specific emissions from the landfill are released to the environment (air due to landfil gas and water due to landfil leachate).

## Geography
Landfill site with mean annual temperature (MAT) of 16.743579766537 degC, mean annual precipitation (MAP) of 1250.84108527132 mm/year, and net infiltration of 790.252035689178 mm/year.The leachate percolating through the landfill has an average residence time of 6.33 years.
References: UN data, 2020. Precipitation, Environment Statistics Database, United Nations Statistics Division Available at: http://data.un.org/Data.aspx?q=precipitation&d=ENV&f=variableID%3a6;
World Bank, 2022. Surface area (sq.km), World Bank Group Available at: https://data.worldbank.org/indicator/AG.SRF.TOTL.K2;
Doka G.,2021. A model for composition-specific life cycle inventories of regionalised wastewater fates, Zurich, Switzerland. http://www.doka.ch/publications.htm

## Technology
Sanitary (controlled) landfill for municipal solid waste. Ultimate average landfill height is 20 meters. Operation phase duration is 30 years. The total raw landfill gas mass produced in the landfill from this waste is 0.1453 kg. The total CH4 mass in the raw landfill gas is 0.0823 kg. Percentage of landfill gas directly emitted is 47w%. Percentage of landfill gas captured and flared is 18.02w%. Percentage of landfill gas captured and utilised is 34.98%. Conversion efficiencies are 27.8e% for electricity and 13.5e% for useful heat. Leachate generated during the first 100 years is collected and treated region-specifically before emission. Based on average waste composition and climate data the end of carbonate phase is estimated to be reached 2'863 years after waste deposition.

## Reference product
- heat, district or industrial, other than natural gas: 1 MJ; By-product classification allocatable product; CPC 17300: Steam and hot water; lognormal variance with pedigree 0.11251, pedigree (1,1,1,1,1)
  Net production of heat from landfill gas utilisation.
  Uncertainty: Uncertainty calculated depending on waste input and uncertainty of transfer coefficients in landfill to landfill gas, uncertainty in gas capture and utilisation.
  production volume 0.00346905 MJ
    Calculated from the production volume of the reference product in proportion to the respective output amounts.
  property corresponding fuel use, propane, furnace >100kW 0 MJ; name fuel_use
    Lower heating value of the fuel input related to the heat/electricity output, taken directly from ecoinvent v3.0 dataset "heat production, natural gas, at industrial furnace >100kW, GLO 2000".
  property price 0.0106 EUR2005
    Average European district heat price from Ecoheatcool and Euroheat 2005-2006, Ecoheat Work package 1: The European heat market. Final report. 10.6 EUR/GJ i s the price of district heat. http://www.solarthermalworld.org/files/Ecoheatcool%20WP1%20Web.pdf?download
  properties: carbon allocation 0 kg, carbon content 0, carbon content, fossil 0, carbon content, non-fossil 0, dry mass 1 kg, heating value, net 1 MJ, water content 0, water in wet mass 0 kg, wet mass 1 kg

## Inputs from technosphere
- acetone, liquid: 1.45373e-5, 4.70042e-5 kg (2 suppliers, which the file names only by identifier); sum of these 6.15415e-5 kg
- borax, anhydrous, powder: 5.45485e-7 kg
- boric acid, anhydrous, powder: 4.36168e-6 kg
- carbon dioxide, liquid: 2.3791e-5, 5.00807e-6 kg (2 suppliers, which the file names only by identifier); sum of these 2.8799e-5 kg
- chemical factory, organics: 1.91197e-13 unit
- chemical, organic: 0.000301073 kg
- cyclohexane: 2.32424e-5 kg
- dimethyl sulfoxide: 8.54411e-5 kg
- dipropylene glycol monomethyl ether: 0.000198102, 4.17309e-5 kg (2 suppliers, which the file names only by identifier); sum of these 0.000239833 kg
- electricity, medium voltage: 0.0770103 kWh
- ethanol, without water, in 99.7% solution state, from ethylene: 2.1665e-5, 4.82413e-5 kg (2 suppliers, which the file names only by identifier); sum of these 6.99064e-5 kg
- ethyl acetate: 5.78371e-6 kg
- heat, district or industrial, natural gas: 0.0234369 MJ
- heat, district or industrial, other than natural gas: 0.0746815 MJ
- heptane: 6.15415e-5 kg
- hydrochloric acid, without water, in 30% solution state: 6.0645e-6, 2.7156e-5 kg (2 suppliers, which the file names only by identifier); sum of these 3.32205e-5 kg
- hydrogen, liquid: 3.36449e-9, 1.53967e-8 kg (2 suppliers, which the file names only by identifier); sum of these 1.87612e-8 kg
- inert waste: -8.19765e-7, -7.06038e-9, -2.88957e-6 kg (3 suppliers, which the file names only by identifier); sum of these -3.71639e-6 kg
- methyl ethyl ketone: 2.09957e-6, 7.92279e-7 kg (2 suppliers, which the file names only by identifier); sum of these 2.89185e-6 kg
- monochloropentafluoroethane: 1.63712e-6 kg
- municipal solid waste: -8.56226e-8, -5.03022e-6, -3.08316e-8, -6.05557e-5, -2.15748e-8 kg (5 suppliers, which the file names only by identifier); sum of these -6.57239e-5 kg
- nitric acid, without water, in 50% solution state: 1.46069e-6, 1.90025e-5, 2.17036e-6, 5.39728e-6, 7.019e-6, 2.58609e-6, 8.8945e-6, 2.34488e-6, 2.16233e-6, 1.64788e-5 kg (10 suppliers, which the file names only by identifier); sum of these 6.75164e-5 kg
- nitrogen, liquid: 0.000548503, 0.00015056 kg (2 suppliers, which the file names only by identifier); sum of these 0.000699064 kg
- polyester resin, unsaturated: 4.75877e-7, 3.25844e-6 kg (2 suppliers, which the file names only by identifier); sum of these 3.73432e-6 kg
- polyethylene terephthalate, granulate, amorphous: 0.000378809 kg
- solvent, organic: 4.94101e-5 kg
- spent solvent mixture: -0.00036781, -3.36705e-6, -0.000143716 kg (3 suppliers, which the file names only by identifier); sum of these -0.000514893 kg
- steam, in chemical industry: 0.000129855, 0.000736506 kg (2 suppliers, which the file names only by identifier); sum of these 0.000866361 kg
- sulfuric acid: 8.34823e-5, 1.09212e-5 kg (2 suppliers, which the file names only by identifier); sum of these 9.44035e-5 kg
- tetrahydrofuran: 2.28241e-5 kg
- toluene, liquid: 0.000144979, 1.93306e-5 kg (2 suppliers, which the file names only by identifier); sum of these 0.00016431 kg
- wastewater from liquid crystal production: -1.04947e-6, -5.07512e-9 m3 (2 suppliers, which the file names only by identifier); sum of these -1.05455e-6 m3

## Inputs from nature
- Water, unspecified natural origin [natural resource, in water]: 0.00124278 m3

## Emissions to nature
- Ethyl acetate [air, urban air close to ground]: 1.45788e-8 kg
- Heptane [air, urban air close to ground]: 4.6425e-7 kg
- Hydrocarbons, chlorinated [air, urban air close to ground]: 1.67297e-6 kg
- Hydrochloric acid [air, urban air close to ground]: 4.37363e-8 kg
- Methyl ethyl ketone [air, urban air close to ground]: 8.06612e-7 kg
- NMVOC, non-methane volatile organic compounds [air, urban air close to ground]: 4.6425e-7 kg
- Toluene [air, urban air close to ground]: 3.25035e-7 kg
- Water [air, unspecified]: 7.58096e-5 m3
- BOD5, Biological Oxygen Demand [water, surface water]: 8.00637e-6 kg
- COD, Chemical Oxygen Demand [water, surface water]: 1.32045e-5 kg
- DOC, Dissolved Organic Carbon [water, surface water]: 4.89057e-6 kg
- Nitrogen [water, surface water]: 3.41167e-6 kg
- Phosphorus [water, surface water]: 1.48178e-7 kg
- Suspended solids, unspecified [water, surface water]: 3.85979e-6 kg
- TOC, Total Organic Carbon [water, surface water]: 4.89057e-6 kg
- Water [water, unspecified]: 0.00116592 m3
