# hardwood forestry, meranti, sustainable forest management

Dataset: EcoSpold 2, unit process
Geography: RoW
Time period: 2000-01-01 to 2022-12-31
Technology level: current
Classification: ISIC rev.4 ecoinvent: 0220:Logging
Classification: EcoSpold01Categories: wooden materials/extraction
Synonyms: Shorea ssp.; Lauan; Seraya
Scenario: Business-as-Usual
System model: Allocation at the point of substitution
Generated by: Frank Werner (obsolete)
Published in: Althaus H.J. 2007
Database: ecoinvent
isCopyrightProtected: true

## General comment
This dataset represents the plantation establishment, management and harvesting of one m3 meranti wood. The dataset covers (close to) sustainable forest management in Malaysia.

The data are collected from company reports, scientific journals, the internet, a field visit to a logging site and consultation with forestry experts in Malaysia. The forest area is part of the state of Terengganu and is managed under the selective management system. The logging company professes that its timber is produced sustainably. The fuel use of forestry operations refers to teak plantations in Indonesia; this is considered an expert's guess.

It should be taken into account that the dataset stems from a legally operating, apparently well-documented logging company. Unfortunately, this cannot be assumed to be the standard case for meranti production in Malaysia.

This dataset represents the natural growth of one m3 meranti trees in a tropical forest plantation.

The data stems from a logging company that represents (close to) sustainable forest management (SFM). The forest area is part of the state of Terengganu and is managed under the selective management system of dark red meranti trees.

The data refers to wood 'under bark'. The CO2-assimilation of the biomass is calculated from a carbon content of 49.4% including bark (11%). The energy content embodied in the biomass equals its gross calorific value including bark. The assumed wood density is 600 kg/m3 (u=0%).

The data was obtained from company reports, scientific journals, the internet and a field visit to a logging site as well as consultation with forestry experts in Malaysia.

Wood density and land use data can vary considerably depending on the species and how intensive the forest is used. Since the data used are valid for one specific company and region the uncertainty is rather high.
It should be taken into account that the dataset stems from a legally operating, apparently well-documented logging company; unfortunately this cannot be assumed the standard case for meranti production in Malaysia.

## Included activities start
Plantation establishment process starting from meranti tree planting. Natural growth process starting from standing meranti trees at plantation.

## Included activities end
This acitivity ends with harvested meranti tree logs, at forest road. The dataset includes harvesting, hauling operations, fuel used for forest road construction and emissions from burning of branchings. The dataset does not include the branchings left to rot on the ground, land use of forest roads, use of gravel nor the logging impacts on further vegetation or environmental impacts from post-harvest processes (potential forest degradation/deforestation). This activity ends with standing meranti trees before harvesting. The dataset includes the CO2 absorption from air and the land use for the trees to grow (including 11% bark). The dataset does not include land use of the forest road area.

## Technology
The dataset reflects average technology.

Fuel consumption is assumed to lie between the Central African azobe harvesting and European average consumption
(Fisher, et al., 2005).

A rotation period of 60 years (derived from reproduction time) is assumed, allowing for two cutting cycles of 30 years.

Harvesting practices are mainly manual. Trees are felled using a chainsaw. Lianas on the trees to be felled are cut about six months previously, which prevents connected trees to be pulled down with the felling of one tree. After the crown is lopped off the trees are crosscut into logs below the first branches and these logs are extracted with the use of a cable and powerwinch by a crawler tractor (Komatsu) from the felling position to the skidding track.

Heavy crawler tractors are used to haul trees from their felling location to the temporary log landings. Tractors are restricted to skidding tracks. The temporary log landings are located within the forest area and are traversed by heavy machinery, such as the tractors and San-tai-wong (6x6 trucks). These carry logs from the temporary log landings in the forest along permanent forest roads to the permanent logyards next to the main roads.

Branchings are assumed to be burned on site; the amount of branchings and respective emissions from biomass burning are estimated based on literature (EPA, 1995 and IPCC, 2003).
References:
Collins, M., K. Fisher, et al. (2005): Study and assessment of available information for a pilot project on a teak garden chair. European Commission - DG Environment, Brussels. Available at webpage: http://ec.europa.eu/environment/ipp/pdf/teak_chair_final_report.pdf.

EPA (1995): Chap. 13.7 Wildfires and prescribed burning. AP-42 Compilation of Air Pollutant Emission Factors, Volume 1: Stationary Point and Area Sources. US Environmental Protection Agen-cy,5th ed.
Available at webpage: epa.gov/ttn/chief/ap42/ch13/final/c13s01.pdf

IPCC (2003): Good practice guidance for land use, land-use change and forestry. Institute for Global Environ-mental Strategies (IGES), Hayama).

The production practise equals natural growth in sustainable forestry. Natural growth relates to the forest area and CO2 from the atmosphere needed to produce meranti trees.

## Reference product
- sawlog and veneer log, meranti, measured as solid wood under bark: 1 m3; By-product classification allocatable product; CPC 031: Wood in the rough
  Reference product. Logs of meranti wood (volume under bark) produced in Malaysia by (close to) sustainable forest management. The meranti wood is subsequently shipped to Europe for use.
  production volume 3.98744 m3
    This is a placeholder value that does not reflect real-world production volumes. This dataset does not currently require a real-world production volume to work in the database framework, and no actual data were collected yet. This has no negative effect on the results of the ecoinvent database.
  property carbon content, non-fossil 0.494
    C content of dry mass is 0.494 kgC/kg dry wood (ecoinvent v2.2 report 21).
  property heating value, net 7950.27 MJ
    LHV is calculated based on the Carbon content of the product. More details can be found on the respective documentation.The property is based on a value of 7.79MJ/kg
  property price 174.94 EUR2005
    Reference: FAOSTAT (accessed 20140112). The price is calculated by using data on total world import quantity (m3) and import value (1000 USD), year 2005. 15174881 m3 of Ind Rwd Wir (NC) Tropica was imported in the world in 2005. The import value was 3209966000 USD. The calculated price is thus (3209966000/15174881*0.8)=174.936586454945 Euro.
  properties: carbon allocation 333.034 kg, carbon content 0.494, carbon content, fossil 0, dry mass 674.157 kg, water content 0.7, water in wet mass 471.91 kg, wet mass 1146.07 kg

## Inputs from technosphere
- diesel, burned in building machine: 309.63 MJ; source Collins, M. 2005; lognormal variance with pedigree 0.062, pedigree (1,1,5,5,1)
  Estimation. Estimated by Collins et al. (2005) based on:
  Further reference: ICL/SHR (2002).
  properties: heating value, net 1 MJ
- lubricating oil: 0.422086, 0.088914 kg (2 suppliers, which the file names only by identifier); sum of these 0.511 kg; source Collins, M. 2005; lognormal variance with pedigree 0.062, pedigree (1,1,5,5,1)
  (same comment as for diesel, burned in building machine)
  properties: carbon content, fossil 0.75, dry mass 1 kg, heating value, net 40.2 MJ, wet mass 1 kg
  note on carbon content, fossil: Lubricating oil is produced from diesel. C-content/dry mass of fats and oils considered 75%, from: ecoinvent v2.2 report, n 15a, pg 40
  note on heating value, net: Literature value, Source: IPCC 2006, 2006 IPCC Guidelines for National Greenhouse Gas Inventories, Prepared by the National Greenhouse Gas Inventories Programme, Eggleston H.S., Buendia L., Miwa K., Ngara T. and Tanabe K. (eds). Published: IGES, Japan
- power sawing, without catalytic converter: 0.056154 hour; lognormal variance with pedigree 0.072, pedigree (4,4,5,5,1)
  Estimation. Assumed to cover lubricated oil consumption inventoried in ICL/SHR (2002). Estimated by Collins et al. (2005) based on:
  Further reference: ICL/SHR (2002).

## Inputs from nature
- Carbon dioxide, in air [natural resource, in air]: 2400 kg; lognormal variance with pedigree 0.056, pedigree (3,4,5,5,1)
  Calculated Value. Density of dried matter = 600 kg/m3. C-content = 49.4 %.
- Energy, gross calorific value, in biomass [natural resource, biotic]: 37400 MJ; lognormal variance with pedigree 0.0533532, pedigree (3,4,5,3,1)
- Occupation, forest, extensive [natural resource, land]: 32600 m2*year; lognormal variance with pedigree 0.21, pedigree (5,5,5,5,5)
  Estimation.
- Transformation, from forest, extensive [natural resource, land]: 434 m2; source Rugge, B. A.  1999; lognormal variance with pedigree 0.28, pedigree (5,5,5,5,5)
  Literature Value. Excludes forests roads. Yield = 11.14 3m/ha (excl. bark and forest roads) besides other more valuable commercial species. Total yield = 46 m3/ha. Rotation lenght = 75 years.
- Transformation, to forest, extensive [natural resource, land]: 434 m2; lognormal variance with pedigree 0.28, pedigree (5,5,5,5,5)
  Estimation.
- Wood, hard, standing [natural resource, biotic]: 1.11 m3; lognormal variance with pedigree 0.056, pedigree (3,4,5,5,1)
  Calculated Value. Resource correction for branchings.

## Emissions to nature
All rows: source IPCC 2003
- Carbon dioxide, non-fossil [air, unspecified]: 1182.5 kg; lognormal variance with pedigree 0.056, pedigree (3,4,5,5,1)
  Estimation. Refers to volume under bark.
- Dinitrogen monoxide [air, non-urban air or from high stacks]: 0.0071077 kg; lognormal variance with pedigree 0.096, pedigree (3,4,5,5,1)
  Estimation. Refers to volume under bark.
- Methane, non-fossil [air, non-urban air or from high stacks]: 1.0338 kg; lognormal variance with pedigree 0.096, pedigree (3,4,5,5,1)
  Estimation. Refers to volume under bark.
- Particulate Matter, < 2.5 um [air, non-urban air or from high stacks]: 3.6 kg; lognormal variance with pedigree 0.096, pedigree (3,4,5,5,1)
  Estimation. 4 g/kg.
- Particulate Matter, > 10 um [air, non-urban air or from high stacks]: 2.4 kg; lognormal variance with pedigree 0.096, pedigree (3,4,5,5,1)
  Estimation. 6 g/kg.
- Particulate Matter, > 2.5 um and < 10um [air, non-urban air or from high stacks]: 3 kg; lognormal variance with pedigree 0.096, pedigree (3,4,5,5,1)
  Estimation. 5 g/kg.

## Sampling procedure
literature, partly relying on estimates (fuel consumption)

## Extrapolations
This dataset has been copied from an original dataset covering the geography MY. The uncertainty has been adjusted accordingly.

## Review by Hans-Jörg Althaus 2007-09-25
Passed

## Review by Roland Hischier 2011-10-11
Transfer of documentation done.

## Review by Emilia Moreno Ruiz 2014-05-21
restructured to fit new sector (CO2 intake and land use merged into the forestry dataset)
