# treatment of sewage sludge, 70% water, WWT, WW from glass production, municipal incineration

Dataset: EcoSpold 2, unit process
Geography: GLO
Time period: 2006-01-01 to 2022-12-31
Technology level: current
Classification: ISIC rev.4 ecoinvent: 3821:Treatment and disposal of non-hazardous waste
Scenario: Business-as-Usual
System model: Allocation at the point of substitution
Generated by: Nikolia Stoikou
Database: ecoinvent
isCopyrightProtected: true

## General comment
The process represents the treatment of a waste (sewage sludge) that is exclusively produced from another waste treatment. Municipal incineration is the controlled combustion of a waste. Sewage sludge is generated in the wastewater treatment of 'wastewater from glass production'. Recommended use of this dataset: to be used within the specific chain of treatments for 'wastewater from glass production'. Share of biogenic carbon in the sludge: 0%.

## Included activities start
The activity starts with the waste being available at the gate of the treatment facility. Collection and transportation of the waste to the treatment plant is not included.

## Included activities end
The activity ends with the waste being treated and waste-specific emissions from the incineration process are released to the environment (air and water).

## Geography
Modelling parameters affecting the treatment technology are not specific to this geography.

## Technology
The waste is treated in the incineration plant with flue gas cleaning. Incineration is the controlled combustion of a waste. Auxiliary material consumption for this step of air pollution control (APC) are included in the process. Infrastructure is also included in the process. Air polution control includes, electrostatic precipitator for fly ash (ESP), wet flue gas scrubber and 25% SNCR , 42.77% SCR-high dust , 32.68% SCR-low dust -DeNOx facilities and 0% without DeNOx (weighted according to mass of burnt waste). Efficiency of iron scrap separation from slag : 58%. Efficiency of aluminium scrap separation from slag : 31%. Efficiency of copper scrap separation from slag : 31%. Gross electric efficiency technology mix 15.84% and Gross thermal efficiency technology mix 28.51%

## Reference product
- heat, for reuse in municipal waste incineration only: 1 MJ; By-product classification allocatable product; CPC 17300: Steam and hot water; lognormal variance with pedigree 0.21687, pedigree (1,1,1,1,1)
  net useful heat generated from this waste and used in internal MSWI plant energy redistribution.
  Uncertainty: uncertainty is calculated from uncertainties in waste composition and uncertainties in energy efficiency and the uncertainty in internal energy demand
  production volume 1.08514e6 MJ
    Calculated from the production volume of the reference product in proportion to the respective output amounts.
  property price 0.0106 EUR2005
    Average European district heat price from Ecoheatcool and Euroheat 2005-2006, Ecoheat Work package 1: The European heat market. Final report. 10.6 EUR/GJ i s the price of district heat. http://www.solarthermalworld.org/files/Ecoheatcool%20WP1%20Web.pdf?download
  properties: carbon allocation 0 kg, carbon content 0

## Inputs from technosphere
- EUR-flat pallet: 1.50776e-5, 6.44289e-6 unit (2 suppliers, which the file names only by identifier); sum of these 2.15205e-5 unit
- chemical, inorganic: 0.000601588 kg
- diesel: 2.93212e-6, 1.45282e-6, 2.96856e-7, 2.05383e-7, 2.89532e-5, 6.98429e-8 kg (6 suppliers, which the file names only by identifier); sum of these 3.39102e-5 kg
- dolomite: 0.00130276, 0.000381477 kg (2 suppliers, which the file names only by identifier); sum of these 0.00168424 kg
- electricity, medium voltage: 3.49819e-5, 9.84546e-5, 9.41148e-6, 2.62183e-6, 3.19886e-5, 0.00106526, 4.44176e-6, 0.000169099, 0.000332395, 0.000212001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 kWh (44 suppliers, which the file names only by identifier); sum of these 0.00667216 kWh
- feldspar: 0.000658198 kg
- glass cullet, sorted: 0.00535677, 0.0109202 kg (2 suppliers, which the file names only by identifier); sum of these 0.016277 kg
- graphite: 7.63184e-8 kg
- heavy fuel oil: 0.000732883, 6.16688e-6, 3.13513e-5, 4.06517e-5, 7.9112e-6, 1.05903e-5, 0.000354481 kg (7 suppliers, which the file names only by identifier); sum of these 0.00118404 kg
- light fuel oil: 0.000685123, 0.00034302, 6.80039e-5, 6.53867e-6, 4.85932e-6, 4.51266e-6, 3.36947e-5 kg (7 suppliers, which the file names only by identifier); sum of these 0.00114575 kg
- lime: 0.000291465, 0.000938756 kg (2 suppliers, which the file names only by identifier); sum of these 0.00123022 kg
- lime, hydrated, loose weight: 7.63015e-6 kg
- lubricating oil: 4.55967e-7 kg
- municipal solid waste: -2.52554e-7, -7.89577e-7, -1.19173e-7, -1.4865e-7, -5.52868e-7, -1.16061e-6, -6.63813e-8, -1.00813e-7, -5.12383e-7, -8.87558e-7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 kg (38 suppliers, which the file names only by identifier); sum of these -0.000150397 kg
- natural gas, high pressure: 1.44504e-5, 5.63279e-6, 6.09956e-6, 3.49338e-5, 1.0367e-5, 0.000586471, 5.9942e-5, 1.90349e-5, 4.0962e-5, 3.46324e-5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 m3 (43 suppliers, which the file names only by identifier); sum of these 0.00250311 m3
- packaging glass factory: 1.02333e-12, 2.39479e-12 unit (2 suppliers, which the file names only by identifier); sum of these 3.41812e-12 unit
- polyethylene, high density, granulate: 0.00035275 kg
- portachrom: 4.74631e-6 kg
- portafer: 2.88384e-6 kg
- refractory, fireclay, packed: 0.000391033 kg
- selenium: 1.15281e-7 kg
- silica sand: 0.00658607 kg
- soda ash, light: 0.00237031 kg
- solid bleached and unbleached board carton: 0.000369755, 0.000158002 kg (2 suppliers, which the file names only by identifier); sum of these 0.000527757 kg
- tap water: 3.58975e-6, 0.000149598, 5.93265e-6, 1.107e-5, 0.00171193, 3.89175e-6, 2.98218e-5 kg (7 suppliers, which the file names only by identifier); sum of these 0.00191583 kg
- wastewater from glass production: -4.81271e-5 m3

## Inputs from nature
- Water, unspecified natural origin [natural resource, in water]: 5.4143e-5 m3

## Emissions to nature
- Ammonia [air, urban air close to ground]: 5.01947e-10 kg
- Antimony ion [air, urban air close to ground]: 1.84305e-9 kg
- Arsenic ion [air, urban air close to ground]: 1.84305e-9 kg
- Benzene [air, urban air close to ground]: 2.87255e-8 kg
- Benzo(a)pyrene [air, urban air close to ground]: 2.73517e-12 kg
- Cadmium II [air, urban air close to ground]: 1.84305e-9 kg
- Carbon dioxide, fossil [air, urban air close to ground]: 0.0150505 kg
- Carbon monoxide, fossil [air, urban air close to ground]: 6.29087e-7 kg
- Chromium III [air, urban air close to ground]: 1.84305e-9 kg
- Cobalt II [air, urban air close to ground]: 1.84305e-9 kg
- Copper ion [air, urban air close to ground]: 1.84305e-9 kg
- Dinitrogen monoxide [air, urban air close to ground]: 5.47013e-8 kg
- Dioxins, measured as 2,3,7,8-tetrachlorodibenzo-p-dioxin [air, urban air close to ground]: 3.41876e-17 kg
- Formaldehyde [air, urban air close to ground]: 3.89753e-8 kg
- Hydrocarbons, aliphatic, alkanes, unspecified [air, urban air close to ground]: 2.27984e-7 kg
- Hydrochloric acid [air, urban air close to ground]: 1.35904e-6 kg
- Hydrogen fluoride [air, urban air close to ground]: 4.92209e-7 kg
- Lead II [air, urban air close to ground]: 2.11103e-8 kg
- Manganese II [air, urban air close to ground]: 1.84305e-9 kg
- Methane, fossil [air, urban air close to ground]: 3.14533e-7 kg
- NMVOC, non-methane volatile organic compounds [air, urban air close to ground]: 8.46796e-8 kg
- Nickel II [air, urban air close to ground]: 1.84305e-9 kg
- Nitrogen oxides [air, urban air close to ground]: 5.74244e-5 kg
- Particulate Matter, < 2.5 um [air, urban air close to ground]: 6.89092e-6 kg
- Particulate Matter, > 10 um [air, urban air close to ground]: 4.37519e-7 kg
- Particulate Matter, > 2.5 um and < 10um [air, urban air close to ground]: 3.55484e-7 kg
- Selenium IV [air, urban air close to ground]: 2.00438e-7 kg
- Sulfur dioxide [air, urban air close to ground]: 9.40666e-5 kg
- Water [air, unspecified]: 7.77845e-6 m3
- AOX, Adsorbable Organic Halogen [water, surface water]: 1.91583e-9 kg
- BOD5, Biological Oxygen Demand [water, surface water]: 1.91583e-7 kg
- COD, Chemical Oxygen Demand [water, surface water]: 1.91583e-7 kg
- Copper ion [water, surface water]: 1.91583e-11 kg
- DOC, Dissolved Organic Carbon [water, surface water]: 1.91583e-7 kg
- Nitrite [water, surface water]: 1.91583e-9 kg
- Oils, unspecified [water, surface water]: 1.91583e-8 kg
- Sulfate [water, surface water]: 1.91583e-8 kg
- Suspended solids, unspecified [water, surface water]: 1.91583e-8 kg
- TOC, Total Organic Carbon [water, surface water]: 1.91583e-7 kg
- Water [water, unspecified]: 1.53266e-7 m3
- Zinc II [water, surface water]: 1.91583e-10 kg

## Extrapolations
Modelling parameters are based on an average municipal solid waste incineration plant in Switzerland for the year of 2010 (grate incinerators).
