# natural gas, burned in gas turbine

Dataset: EcoSpold 2, unit process
Geography: RoE
Time period: 2000-01-01 to 2022-12-31
Technology level: current
Classification: ISIC rev.4 ecoinvent: 3510:Electric power generation, transmission and distribution
Scenario: Business-as-Usual
System model: Allocation at the point of substitution
Generated by: Maresa Bussa
Published in: Bussa, M. 2022
Database: ecoinvent
isCopyrightProtected: true

## General comment
This dataset represents the combustion of natural gas in a gas turbine [MJ fuel input] with the specific gas supply in a subset of countries within Europe (RER).
This activity represents burning of natural gas (supplied at high pressure) for the purpose of supplying energy to processes in the liquefaction/evaporation, (transport) transmission, and distribution of natural gas. As described in Bussa et al. (2022, section 4.2.2), this activity is intended to replace the three different datasets related to natural gas "burned in" (in gas turbine, for compressor station, and in gas motor for storage) from previous studies by Schori and Frischknecht (2012) and Faist Emmenegger et al. (2007).
Reference(s):
Bussa, M., N. Jungbluth, Ch. Meili (2022) Life cycle inventories for long-distance transport and distribution of natural gas. ESU-services Ltd. Schaffhausen, Switzerland. Available from: http://esu-services.ch/data/public-lci-reports/

## Included activities start
This activity starts with the input of natural gas, at high pressure.

## Included activities end
The module includes fuel input, infrastructure (gas turbine), and emissions to air.

## Geography
This geography represents the subset of European countries, excluding the following: Belgium, Switzerland, Germany, Spain, France, United Kingdom, Italy, Netherlands, Norway, Romania, Russia, Turkey

## Reference product
- natural gas, burned in gas turbine: 1 MJ; By-product classification allocatable product; CPC 17100: Electrical energy
  production volume 1 MJ
    Annual production volume unknown.
  property price 0.004622 EUR2005
    Calculated based on inputs: The price of the product has been calculated as a sum of the values of the material and energy inputs for this product. This value is therefore a rough estimation. It may underestimate the real price since there are additional expenses when producing any product. These expences can include for example labour costs, treatment of waste materials and profit for the producer. Please consider carefully whether this level of data quality is acceptable for your application.
  properties: carbon allocation 0 kg, carbon content 0

## Inputs from technosphere
- gas turbine, 10MW electrical: 1.15e-10 unit; lognormal variance with pedigree 0.470437, pedigree (4,3,5,3,5)
  infrastructure estimation
  properties: Corresponding fuel use 3.01404 MJ
- natural gas, high pressure: 0.000924666, 0.00312473, 0.00672423, 0.00568518, 0.00264646, 0.000637701, 0.00153048, 0.00031885, 0.00283777, 0.00165802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 m3 (11 suppliers, which the file names only by identifier); sum of these 0.027778 m3; lognormal variance with pedigree 0.169295, pedigree (4,3,5,3,5)
  natural gas input
  properties: carbon content, fossil 0.741, dry mass 0.735 kg, heating value, gross 40 MJ, heating value, net 36 MJ, wet mass 0.735 kg
  note on heating value, gross: At standard conditions; based on Meili et al. (2022) section 5.2

## Emissions to nature
- Carbon dioxide, fossil [air, urban air close to ground]: 0.056 kg; lognormal variance with pedigree 0.208695, pedigree (5,5,5,3,5)
  rough estimate
- Carbon monoxide, fossil [air, urban air close to ground]: 4e-5 kg; lognormal variance with pedigree 0.855673, pedigree (5,5,5,3,5)
  rough estimate
- Dinitrogen monoxide [air, urban air close to ground]: 1e-6 kg; lognormal variance with pedigree 0.2492, pedigree (5,5,5,3,5)
  rough estimate
- Dioxins, measured as 2,3,7,8-tetrachlorodibenzo-p-dioxin [air, urban air close to ground]: 2.9e-17 kg; lognormal variance with pedigree 0.509837, pedigree (5,5,5,3,5)
  rough estimate
- Heat, waste [air, urban air close to ground]: 1.1 MJ; lognormal variance with pedigree 0.208695, pedigree (5,5,5,3,5)
  rough estimate
- Mercury II [air, urban air close to ground]: 3e-11 kg; lognormal variance with pedigree 0.855673, pedigree (5,5,5,3,5)
  rough estimate
- Methane, fossil [air, urban air close to ground]: 4.5e-6 kg; lognormal variance with pedigree 0.2492, pedigree (5,5,5,3,5)
  rough estimate
- NMVOC, non-methane volatile organic compounds [air, urban air close to ground]: 1e-6 kg; lognormal variance with pedigree 0.2492, pedigree (5,5,5,3,5)
  rough estimate
- Nitrogen oxides [air, urban air close to ground]: 0.00013 kg; lognormal variance with pedigree 0.2492, pedigree (5,5,5,3,5)
  rough estimate
- Sulfur dioxide [air, urban air close to ground]: 5.5e-7 kg; lognormal variance with pedigree 0.2087, pedigree (5,5,5,3,5)
  rough estimate

## Sampling procedure
Literature.The emissions are based on generic estimates.

## Extrapolations
A default inventory, based on generic estimates, is assumed representative for all geographies.
