# treatment of sewage sludge, 70% water, WWT, WW from soft fibreboard production, municipal incineration FAE

Dataset: EcoSpold 2, unit process
Geography: CH
Time period: 2006-01-01 to 2022-12-31
Technology level: current
Classification: ISIC rev.4 ecoinvent: 3821:Treatment and disposal of non-hazardous waste
Scenario: Business-as-Usual
System model: Allocation at the point of substitution
Generated by: Nikolia Stoikou
Database: ecoinvent
isCopyrightProtected: true

## General comment
The process represents the treatment of a waste (sewage sludge) that is exclusively produced from another waste treatment. Municipal incineration is the controlled combustion of a waste. Sewage sludge is generated in the wastewater treatment of 'wastewater from soft fibreboard production'. Recommended use of this dataset: to be used within the specific chain of treatments for 'wastewater from soft fibreboard production'. Share of biogenic carbon in the sludge: 98.948%.

## Included activities start
The activity starts with the waste being available at the gate of the treatment facility. Collection and transportation of the waste to the treatment plant is not included.

## Included activities end
The activity ends with the waste being treated and waste-specific emissions from the incineration process are released to the environment (air and water).

## Geography
Modelling parameters affecting the treatment technology are specific to this geography and to the technology mix encountered in Switzerland in 2012.

## Technology
The waste is treated in the incineration plant with flue gas cleaning. Incineration is the controlled combustion of a waste. Auxiliary material consumption for this step of air pollution control (APC) are included in the process. Infrastructure is also included in the process. Air polution control includes, electrostatic precipitator for fly ash (ESP), wet flue gas scrubber and 25% SNCR , 42.77% SCR-high dust , 32.68% SCR-low dust -DeNOx facilities and 0% without DeNOx (weighted according to mass of burnt waste). Efficiency of iron scrap separation from slag : 58%. Efficiency of aluminium scrap separation from slag : 31%. Efficiency of copper scrap separation from slag : 31%. The technology mix for this dataset includes a filter ash treatment (FLUWA) of a share of 46.22%. Gross electric efficiency technology mix 15.84% and Gross thermal efficiency technology mix 28.51%

## Reference product
- heat, for reuse in municipal waste incineration only: 1 MJ; By-product classification allocatable product; CPC 17300: Steam and hot water; lognormal variance with pedigree 0.041348, pedigree (1,1,1,1,1)
  net useful heat generated from this waste and used in internal MSWI plant energy redistribution.
  Uncertainty: uncertainty is calculated from uncertainties in waste composition and uncertainties in energy efficiency and the uncertainty in internal energy demand
  production volume 9275.19 MJ
    Calculated from the production volume of the reference product in proportion to the respective output amounts.
  property price 0.0106 EUR2005
    Average European district heat price from Ecoheatcool and Euroheat 2005-2006, Ecoheat Work package 1: The European heat market. Final report. 10.6 EUR/GJ i s the price of district heat. http://www.solarthermalworld.org/files/Ecoheatcool%20WP1%20Web.pdf?download
  properties: carbon allocation 0 kg, carbon content 0

## Inputs from technosphere
- acrylic dispersion, with water, in 58% solution state: 1.15507e-8 kg
- acrylic varnish, with water, in 53% solution state: 3.79524e-9 kg
- aluminium scrap, post-consumer: -2.41692e-7 kg
- aluminium sulfate, powder: 6.24905e-6 kg
- aluminium, wrought alloy: 2.41692e-7 kg
- corrugated board box: 2.54921e-7, 5.91697e-7, 9.49581e-9 kg (3 suppliers, which the file names only by identifier); sum of these 8.56114e-7 kg
- electricity, low voltage: 1.97544e-7, 3.91486e-7, 3.76064e-6, 6.70842e-8, 1.34404e-6, 1.21995e-8, 9.31635e-7, 2.74344e-7 kWh (8 suppliers, which the file names only by identifier); sum of these 6.97898e-6 kWh
- electricity, medium voltage: 0.0074669 kWh
- ethylene glycol monoethyl ether: 5.08621e-9 kg
- furnace, wood chips, with silo, 1000kW: 3.95433e-10 unit
- heat, district or industrial, natural gas: 4.08718e-6, 1.10672e-5, 1.81863e-7, 0.0281733 MJ (4 suppliers, which the file names only by identifier); sum of these 0.0281886 MJ
- heat, district or industrial, other than natural gas: 0.00991522 MJ
- industrial machine, heavy, unspecified: 2.11602e-9 kg
- inert waste, for final disposal: -5.64604e-6 kg
- isopropanol: 2.11602e-8 kg
- latex: 0.000112807 kg
- maize starch: 1.66952e-9 kg
- municipal solid waste: -0.000184458 kg
- paper, woodfree, coated: 1.3492e-5 kg
- paraffin: 7.90307e-5 kg
- printing ink, offset, without solvent, in 47.5% solution state: 8.99793e-8 kg
- pulpwood, softwood, measured as solid wood under bark: 1.91891e-7 m3
- raw sewage sludge: -0.000410707 kg
- sheet rolling, aluminium: 2.41692e-7 kg
- slab and siding, softwood, wet, measured as dry mass: 0.00130918 kg
- spent solvent mixture: -1.04691e-8, -4.09065e-9 kg (2 suppliers, which the file names only by identifier); sum of these -1.45598e-8 kg
- synthetic rubber: 1.73746e-9 kg
- tap water: 0.031432 kg
- textile, woven cotton: 2.73723e-9 kg
- thermoforming, with calendering: 3.86319e-9 kg
- vinyl acetate: 0.000143992 kg
- waste emulsion paint: -2.50144e-9, -2.35796e-10 kg (2 suppliers, which the file names only by identifier); sum of these -2.73723e-9 kg
- waste paper, unsorted: -1.89277e-6, -1.89277e-6 kg (2 suppliers, which the file names only by identifier); sum of these -3.78554e-6 kg
- waste paperboard, unsorted: -4.28057e-7, -4.28057e-7 kg (2 suppliers, which the file names only by identifier); sum of these -8.56114e-7 kg
- wastewater from soft fibreboard production: -2.12873e-5 m3
- white spirit: 2.96048e-8 kg
- wood ash mixture, pure: -8.98722e-6 kg
- wood chips, dry, measured as dry mass: 0.0133079 kg
- wooden board factory, organic bonded boards: 4.70725e-13 unit

## Inputs from nature
- Water, cooling, unspecified natural origin [natural resource, in water]: 6.40348e-5 m3

## Emissions to nature
- 2-Propanol [air, urban air close to ground]: 2.11602e-8 kg
- Acetaldehyde [air, unspecified]: 1.09644e-9 kg
- Ammonia [air, unspecified]: 3.10958e-8 kg
- Arsenic ion [air, unspecified]: 1.79744e-11 kg
- Benzene [air, unspecified]: 1.63567e-8 kg
- Benzene, ethyl- [air, unspecified]: 5.39233e-10 kg
- Benzene, ethyl- [air, urban air close to ground]: 9.4056e-10 kg
- Benzene, hexachloro- [air, unspecified]: 1.29416e-16 kg
- Benzo(a)pyrene [air, unspecified]: 8.98722e-12 kg
- Bromine [air, unspecified]: 1.07847e-9 kg
- Cadmium II [air, unspecified]: 1.25821e-11 kg
- Calcium [air, unspecified]: 1.0515e-7 kg
- Carbon dioxide, non-fossil [air, unspecified]: 0.00192326 kg
- Carbon monoxide, non-fossil [air, unspecified]: 5.39233e-6 kg
- Chlorine [air, unspecified]: 3.2354e-9 kg
- Chromium III [air, unspecified]: 7.11788e-11 kg
- Chromium VI [air, unspecified]: 7.18978e-13 kg
- Copper ion [air, unspecified]: 3.95438e-10 kg
- Dinitrogen monoxide [air, unspecified]: 4.13412e-8 kg
- Dioxins, measured as 2,3,7,8-tetrachlorodibenzo-p-dioxin [air, unspecified]: 5.57208e-16 kg
- Fluorine [air, unspecified]: 8.98722e-10 kg
- Formaldehyde [air, unspecified]: 2.33668e-9 kg
- Heptane [air, urban air close to ground]: 9.20177e-9 kg
- Hydrocarbons, aliphatic, alkanes, unspecified [air, unspecified]: 1.63567e-8 kg
- Hydrocarbons, aliphatic, unsaturated [air, unspecified]: 5.57208e-8 kg
- Lead II [air, unspecified]: 4.49361e-10 kg
- Magnesium [air, unspecified]: 6.4708e-9 kg
- Manganese II [air, unspecified]: 3.05565e-9 kg
- Mercury II [air, unspecified]: 5.39233e-12 kg
- Methane, non-fossil [air, unspecified]: 5.39233e-8 kg
- Methanol [air, urban air close to ground]: 9.70651e-10 kg
- NMVOC, non-methane volatile organic compounds [air, unspecified]: 5.95288e-7 kg
- Nickel II [air, unspecified]: 1.07847e-10 kg
- Nitrogen oxides [air, unspecified]: 4.04425e-6 kg
- PAH, polycyclic aromatic hydrocarbons [air, unspecified]: 1.99516e-10 kg
- Particulate Matter, < 2.5 um [air, unspecified]: 8.0885e-7 kg
- Particulate Matter, > 10 um [air, urban air close to ground]: 5.16126e-7 kg
- Particulate Matter, > 2.5 um and < 10um [air, unspecified]: 4.49361e-8 kg
- Phenol, pentachloro- [air, unspecified]: 1.45593e-13 kg
- Phosphorus [air, unspecified]: 5.39233e-9 kg
- Potassium I [air, unspecified]: 4.20602e-7 kg
- Propylene oxide [air, urban air close to ground]: 1.76658e-9 kg
- Sodium [air, unspecified]: 2.33668e-8 kg
- Sulfur dioxide [air, unspecified]: 4.49361e-8 kg
- Toluene [air, unspecified]: 5.39233e-9 kg
- Toluene [air, urban air close to ground]: 8.30877e-10 kg
- Water [air, unspecified]: 3.83293e-5 m3
- Xylene [air, urban air close to ground]: 8.30877e-10 kg
- Zinc II [air, unspecified]: 5.39233e-9 kg
- m-Xylene [air, unspecified]: 2.15693e-9 kg
- Water [water, unspecified]: 3.58503e-5 m3

## Extrapolations
Modelling parameters are based on an average municipal solid waste incineration plant in Switzerland for the year of 2010 (grate incinerators).
