# treatment of waste emulsion paint, hazardous waste incineration, with energy recovery

Dataset: EcoSpold 2, unit process
Geography: RoW
Time period: 1997-01-01 to 2022-12-31
Technology level: current
Classification: ISIC rev.4 ecoinvent: 3822:Treatment and disposal of hazardous waste
Tags: Treatment
Scenario: Business-as-Usual
System model: Allocation at the point of substitution
Share of production covered: 39 %
Generated by: Gabor Doka (obsolete)
Published in: Doka G. 2008
Database: ecoinvent
isCopyrightProtected: true

## General comment
Inventoried waste contains 100% Emulsion paint (remains); . waste composition (wet, in ppm): upper heating value 11.14 MJ/kg; lower heating value 10.51 MJ/kg; H2O n.a.; O 214760; H 31708; C 268330; S n.a.; N n.a.; P n.a.; B n.a.; Cl 86465; Br n.a.; F n.a.; I n.a.; Ag n.a.; As 0.44122; Ba n.a.; Cd 0.016849; Co n.a.; Cr 1.248; Cu n.a.; Hg 0.0085442; Mn n.a.; Mo n.a.; Ni 0.95527; Pb 0.64946; Sb n.a.; Se n.a.; Sn n.a.; V n.a.; Zn 6.5444; Be n.a.; Sc n.a.; Sr n.a.; Ti 135000; Tl n.a.; W n.a.; Si 149810; Fe n.a.; Ca 113920; Al n.a.; K n.a.; Mg n.a.; Na n.a.; Share of carbon in waste that is biogenic 0%. Net energy produced in HWI: 17.11MJ/kg thermal energy and 1.27MJ/kg electric energy. Allocation of energy production: no substitution or expansion. 100% of burden allocated to waste disposal function of HWI. One kg of this waste produces 0.707 kg of residues, which are landfilled. Additional solidification with 0.2828 kg of cement.

## Included activities end
waste-specific air and water emissions from incineration, auxiliary material consumption for flue gas cleaning. Short-term emissions to river water and long-term emissions to ground water from residual material landfill (from solidified fly ashes and scrubber slugde). Process energy demands for HWI.

## Geography
Specific to the technology encountered in Switzerland in 2000. Well applicable to modern incineration practices in Europe or North America or Japan.

## Technology
Swiss HWI plant in 2000 with wet flue gas scrubber and low-dust SCR DeNOx facility. Gross thermal efficiency 74.4% and gross electric efficiency 10%.

## Time period
Transfer coefficients for modern Swiss MSWI. Emission speciation based on early 90ies data.

## Reference product
- heat, district or industrial, other than natural gas: 1 MJ; name BP2; By-product classification allocatable product; CPC 17300: Steam and hot water; lognormal variance with pedigree 0.122, pedigree (1,1,1,5,1)
  production volume 7.98495e9 MJ
    Calculated based on the production volume of the reference product.
  property corresponding fuel use, propane, furnace >100kW 0 MJ; name fuel_use
    Lower heating value of the fuel input related to the heat/electricity output, taken directly from ecoinvent v3.0 dataset "heat production, natural gas, at industrial furnace >100kW, GLO 2000".
  property price 0.0106 EUR2005
    Average European district heat price from Ecoheatcool and Euroheat 2005-2006, Ecoheat Work package 1: The European heat market. Final report. 10.6 EUR/GJ i s the price of district heat. http://www.solarthermalworld.org/files/Ecoheatcool%20WP1%20Web.pdf?download
  properties: carbon allocation 0 kg, carbon content 0, heating value, net 1 MJ

## Inputs from technosphere
- acetic acid, without water, in 98% solution state: 7.10645e-10 kg
- acrylic dispersion, with water, in 58% solution state: 7.66863e-8 kg
- acrylic varnish, with water, in 53% solution state: 2.51969e-8 kg
- activated carbon, granular: 2.60827e-9 kg
- alkyd paint, white, without solvent, in 60% solution state: 1.15688e-5, 5.49883e-5 kg (2 suppliers, which the file names only by identifier); sum of these 6.65571e-5 kg
- aluminium casting facility: 1.27805e-17 unit
- aluminium oxide, non-metallurgical: 5.22924e-8, 3.08875e-7 kg (2 suppliers, which the file names only by identifier); sum of these 3.61168e-7 kg
- aluminium scrap, new: -4.49262e-8, -4.49262e-8 kg (2 suppliers, which the file names only by identifier); sum of these -8.98524e-8 kg
- aluminium scrap, post-consumer: -1.60461e-6 kg
- aluminium, cast alloy: 9.00236e-7 kg
- aluminium, primary, ingot: 7.60445e-8, 1.38079e-8 kg (2 suppliers, which the file names only by identifier); sum of these 8.98524e-8 kg
- aluminium, wrought alloy: 8.43613e-6 kg
- ammonia, anhydrous, liquid: 3.53033e-10, 3.70017e-11, 7.81304e-10, 1.35988e-9, 1.81863e-10, 1.65411e-10, 3.91314e-9, 1.16898e-10 kg (8 suppliers, which the file names only by identifier); sum of these 6.90853e-9 kg
- asbestos, crysotile type: 7.68119e-5 kg
- brass: 2.1427e-7, 1.07673e-9 kg (2 suppliers, which the file names only by identifier); sum of these 2.15347e-7 kg
- bronze: 1.39359e-5 kg
- cast iron: 1.56127e-5 kg
- clay: 2.09465e-12, 1.36462e-8 kg (2 suppliers, which the file names only by identifier); sum of these 1.36483e-8 kg
- copper, cathode: 1.48593e-5 kg
- corrugated board box: 1.69244e-6, 3.92832e-6, 6.30435e-8 kg (3 suppliers, which the file names only by identifier); sum of these 5.68381e-6 kg
- diesel: 1.79815e-6 kg
- diesel, burned in building machine: 2.16424e-7 MJ
- diesel, burned in diesel-electric generating set, 10MW: 6.47392e-8 MJ
- electricity, low voltage: 1.31151e-6, 2.59911e-6, 2.49672e-5, 4.45377e-7, 8.92321e-6, 8.09937e-8, 6.1852e-6, 1.82139e-6 kWh (8 suppliers, which the file names only by identifier); sum of these 4.6334e-5 kWh
- electricity, medium voltage: 6.62465e-9, 1.86447e-8, 0.00297622, 1.78229e-9, 4.96506e-10, 6.05779e-9, 6.51251e-7, 8.41152e-10, 3.20229e-8, 1.63974e-6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 kWh (50 suppliers, which the file names only by identifier); sum of these 0.00300379 kWh
- electronic component machinery, unspecified: 4.52183e-8 unit
- electronics, for control units: 3.2302e-7 kg
- ethoxylated alcohol (AE7): 7.02121e-10, 3.33306e-9 kg (2 suppliers, which the file names only by identifier); sum of these 4.03518e-9 kg
- ethylene glycol monoethyl ether: 3.37677e-8 kg
- flat glass, coated: 1.38405e-7 kg
- flat glass, uncoated: 8.27394e-8, 4.01791e-7 kg (2 suppliers, which the file names only by identifier); sum of these 4.84531e-7 kg
- fly ash and scrubber sludge: -2.84031e-10, -2.3996e-8, -9.46536e-9 kg (3 suppliers, which the file names only by identifier); sum of these -3.37454e-8 kg
- glass wool mat: 7.68119e-5 kg
- glued laminated timber, average glue mix: 8.61234e-8, 1.8699e-7 m3 (2 suppliers, which the file names only by identifier); sum of these 2.73113e-7 m3
- hazardous waste, for incineration: -9.89994e-8, -4.76084e-8, -1.24446e-9 kg (3 suppliers, which the file names only by identifier); sum of these -1.47852e-7 kg
- hazardous waste, for underground deposit: -2.49599e-8, -1.60773e-9 kg (2 suppliers, which the file names only by identifier); sum of these -2.65676e-8 kg
- heat, district or industrial, natural gas: 3.89919e-5, 0.000347785, 2.71351e-5, 8.40397e-5, 1.38099e-6, 3.26441e-9 MJ (6 suppliers, which the file names only by identifier); sum of these 0.000499336 MJ
- heat, district or industrial, other than natural gas: 1.07342e-5, 1.09302e-9, 4.97294e-9, 0.00355357 MJ (4 suppliers, which the file names only by identifier); sum of these 0.00356431 MJ
- hydrochloric acid, without water, in 30% solution state: 3.71501e-10, 1.66353e-9 kg (2 suppliers, which the file names only by identifier); sum of these 2.03503e-9 kg
- industrial machine, heavy, unspecified: 1.40484e-8 kg
- inert waste, for final disposal: -5.0685e-7, -7.7854e-5 kg (2 suppliers, which the file names only by identifier); sum of these -7.83609e-5 kg
- isopropanol: 2.24722e-7, 1.77451e-8 kg (2 suppliers, which the file names only by identifier); sum of these 2.42468e-7 kg
- kaolin: 3.2028e-7 kg
- lead: 7.92692e-7 kg
- lime, hydrated, packed: 3.30978e-9, 2.80945e-11 kg (2 suppliers, which the file names only by identifier); sum of these 3.33788e-9 kg
- lubricating oil: 6.25017e-7, 1.31662e-7 kg (2 suppliers, which the file names only by identifier); sum of these 7.56679e-7 kg
- maize starch: 1.10841e-8 kg
- marine engine: 5.65637e-7 unit
- methyl ethyl ketone: 2.00294e-10, 7.55813e-11 kg (2 suppliers, which the file names only by identifier); sum of these 2.75875e-10 kg
- nitric acid, without water, in 50% solution state: 4.93977e-10, 6.42627e-9, 7.33973e-10, 1.82526e-9, 2.37369e-9, 8.74566e-10, 3.00794e-9, 7.92993e-10, 7.31257e-10, 2.58858e-10 kg (10 suppliers, which the file names only by identifier); sum of these 1.75188e-8 kg
- nitrogen, liquid: 6.89219e-7, 1.89186e-7 kg (2 suppliers, which the file names only by identifier); sum of these 8.78405e-7 kg
- paper, woodfree, coated: 8.95747e-5 kg
- pig iron: 1.48779e-6, 1.6063e-5 kg (2 suppliers, which the file names only by identifier); sum of these 1.75508e-5 kg
- pitch: 1.07443e-10, 5.70168e-10, 1.63413e-8, 8.13968e-10, 7.1908e-8, 2.81046e-10, 1.27201e-8, 4.93135e-9 kg (8 suppliers, which the file names only by identifier); sum of these 1.07673e-7 kg
- polyethylene terephthalate, granulate, amorphous: 1.89351e-8 kg
- polyethylene, high density, granulate: 2.50583e-5 kg
- polypropylene, granulate: 2.28272e-5 kg
- polystyrene, expandable: 2.17237e-5 kg
- polyurethane, flexible foam: 1.80307e-5, 3.69304e-6 kg (2 suppliers, which the file names only by identifier); sum of these 2.17237e-5 kg
- polyurethane, rigid foam: 7.71152e-7, 1.56149e-6 kg (2 suppliers, which the file names only by identifier); sum of these 2.33264e-6 kg
- polyvinylidenchloride, granulate: 7.1817e-6, 1.4542e-5 kg (2 suppliers, which the file names only by identifier); sum of these 2.17237e-5 kg
- printing ink, offset, without solvent, in 47.5% solution state: 5.9738e-7 kg
- propane, burned in building machine: 1.42267e-7 MJ
- propylene glycol, liquid: 1.60573e-7, 7.93004e-8 kg (2 suppliers, which the file names only by identifier); sum of these 2.39874e-7 kg
- refrigeration machine, R134a as refrigerant: 9.6906e-9 unit
- refrigeration machine, carbon dioxide, liquid as refrigerant: 1.07675e-9 unit
- reinforcing steel: 0.00890793 kg
- road vehicle factory: 9.39989e-15 unit
- sanitary ceramics: 7.68119e-5 kg
- scrap aluminium: -1.56019e-6, -7.32006e-8, -3.28513e-6 kg (3 suppliers, which the file names only by identifier); sum of these -4.91852e-6 kg
- scrap copper: -2.13507e-7, -4.55066e-6, -9.58182e-6 kg (3 suppliers, which the file names only by identifier); sum of these -1.4346e-5 kg
- scrap steel: -2.74019e-6, -0.00671676, -0.0021628 kg (3 suppliers, which the file names only by identifier); sum of these -0.0088823 kg
- section bar rolling, steel: 1.75508e-5 kg
- sheet rolling, aluminium: 1.60461e-6 kg
- sheet rolling, steel: 4.50075e-6 kg
- silica sand: 4.15915e-7 kg
- silicon carbide: 1.0494e-8 kg
- sodium hydroxide, without water, in 50% solution state: 2.34561e-8 kg
- sodium nitrite: 8.01829e-11, 3.9493e-11 kg (2 suppliers, which the file names only by identifier); sum of these 1.19676e-10 kg
- spent solvent mixture: -2.42524e-7, -1.58387e-9, -9.47625e-8 kg (3 suppliers, which the file names only by identifier); sum of these -3.3887e-7 kg
- steel, chromium steel 18/8, hot rolled: 5.38367e-8 kg
- steel, low-alloyed, hot rolled: 6.15725e-7 kg
- stone wool, packed: 1.07673e-7 kg
- sulfuric acid: 2.66902e-7, 3.49164e-8 kg (2 suppliers, which the file names only by identifier); sum of these 3.01819e-7 kg
- synthetic rubber: 4.04929e-6 kg
- tap water: 0.000176584, 7.68265e-6, 3.04673e-7, 6.56494e-5, 5.68505e-7, 8.79165e-5, 1.99862e-7, 1.53151e-6 kg (8 suppliers, which the file names only by identifier); sum of these 0.000340438 kg
- tempering, flat glass: 1.38405e-7 kg
- tetraethyl orthosilicate: 2.65113e-7 kg
- textile, woven cotton: 1.81727e-8 kg
- thermoforming, with calendering: 2.5648e-8 kg
- titanium dioxide: 2.88737e-9, 5.77474e-9 kg (2 suppliers, which the file names only by identifier); sum of these 8.66211e-9 kg
- used lorry with refrigeration machine, 16 metric ton: -1.07673e-8 unit
- used train, passenger, high-speed: -5.5362e-12 unit
- waste electric and electronic equipment: -0.000113045 kg
- waste emulsion paint: -1.7217e-9, -5.8208e-5, -5.48694e-6 kg (3 suppliers, which the file names only by identifier); sum of these -6.36967e-5 kg
- waste emulsion paint, separated: -1.67197e-10 kg
- waste mineral oil: -1.7804e-9, -1.88305e-7, -7.19177e-8 kg (3 suppliers, which the file names only by identifier); sum of these -2.62003e-7 kg
- waste mineral wool: -0.000108587, -5.08105e-7, -4.45286e-5 kg (3 suppliers, which the file names only by identifier); sum of these -0.000153624 kg
- waste paint on metal: -1.01961e-9, -8.65476e-12 kg (2 suppliers, which the file names only by identifier); sum of these -1.02826e-9 kg
- waste paper, unsorted: -1.25662e-5, -1.25662e-5 kg (2 suppliers, which the file names only by identifier); sum of these -2.51325e-5 kg
- waste paperboard, unsorted: -2.8419e-6, -2.8419e-6 kg (2 suppliers, which the file names only by identifier); sum of these -5.68381e-6 kg
- waste plastic, mixture: -1.20633e-5, -6.09582e-8, -1.34494e-7, -1.04551e-5, -8.44498e-5, -8.06023e-7, -3.16135e-7, -3.32916e-7 kg (8 suppliers, which the file names only by identifier); sum of these -0.000108619 kg
- waste polyurethane foam: -2.33081e-7, -1.82825e-10 kg (2 suppliers, which the file names only by identifier); sum of these -2.33264e-7 kg
- waste x-ray film: -1.89351e-8 kg
- wastewater from lorry production: -1.12965e-10, -2.33599e-8 m3 (2 suppliers, which the file names only by identifier); sum of these -2.34728e-8 m3
- wastewater, average: -1.53301e-9, -4.88144e-10, -2.55099e-7, -6.09994e-8 m3 (4 suppliers, which the file names only by identifier); sum of these -3.1812e-7 m3
- water, deionised: 2.29171e-11, 6.36629e-9, 2.0667e-8 kg (3 suppliers, which the file names only by identifier); sum of these 2.70562e-8 kg
- wax, lost-wax casting: 1.44038e-7 kg
- welding, arc, steel: 0.00582238 m
- welding, gas, steel: 0.0441564 m
- white spirit: 1.96549e-7 kg
- wire drawing, copper: 3.2302e-7 kg
- zinc: 6.2302e-5 kg
- zircon: 8.94721e-8 kg

## Inputs from nature
- Water, well, in ground [natural resource, in water]: 7.48331e-7 m3

## Emissions to nature
- 2-Propanol [air, urban air close to ground]: 1.40484e-7 kg
- Ammonia [air, unspecified]: 2.40112e-10 kg
- Benzene [air, unspecified]: 1.41052e-10 kg
- Benzene, ethyl- [air, urban air close to ground]: 6.24445e-9 kg
- Cadmium II [air, unspecified]: 1.86275e-14 kg
- Carbon dioxide, fossil [air, unspecified]: 6.81573e-6 kg
- Carbon monoxide, fossil [air, unspecified]: 1.04766e-8 kg
- Chromium III [air, unspecified]: 3.15483e-12 kg
- Copper ion [air, unspecified]: 3.15483e-12 kg
- Dinitrogen monoxide [air, unspecified]: 2.40112e-10 kg
- Heptane [air, urban air close to ground]: 6.10913e-8 kg
- Lead II [air, unspecified]: 2.0458e-16 kg
- Mercury II [air, unspecified]: 3.71473e-17 kg
- Methane, fossil [air, unspecified]: 1.77661e-10 kg
- Methanol [air, urban air close to ground]: 6.44422e-9 kg
- NMVOC, non-methane volatile organic compounds [air, unspecified]: 5.4131e-5 kg
- Nickel II [air, unspecified]: 1.30285e-13 kg
- Nitrogen [air, unspecified]: 8.78405e-7 kg
- Nitrogen oxides [air, unspecified]: 6.46041e-8 kg
- Particulate Matter, < 2.5 um [air, unspecified]: 2.73491e-9 kg
- Particulate Matter, > 10 um [air, unspecified]: 1.17364e-10 kg
- Particulate Matter, > 2.5 um and < 10um [air, unspecified]: 2.28268e-10 kg
- Propanol [air, urban air close to ground]: 6.43708e-8 kg
- Propylene oxide [air, urban air close to ground]: 1.17285e-8 kg
- Selenium IV [air, unspecified]: 1.86275e-14 kg
- Sulfur dioxide [air, unspecified]: 1.29208e-9 kg
- Toluene [air, unspecified]: 5.93281e-11 kg
- Toluene [air, urban air close to ground]: 5.51626e-9 kg
- Water [air, unspecified]: 1.38737e-7 m3
- Water [air, urban air close to ground]: 1.69342e-8 m3
- Xylene [air, unspecified]: 5.93281e-11 kg
- Xylene [air, urban air close to ground]: 5.51626e-9 kg
- Zinc II [air, unspecified]: 1.86275e-12 kg
- Hydrocarbons, unspecified [soil, unspecified]: 1.18908e-6 kg
- BOD5, Biological Oxygen Demand [water, unspecified]: 1.35669e-9 kg
- COD, Chemical Oxygen Demand [water, unspecified]: 1.35669e-9 kg
- DOC, Dissolved Organic Carbon [water, unspecified]: 5.93281e-10 kg
- Hydrocarbons, unspecified [water, unspecified]: 1.18908e-6 kg
- TOC, Total Organic Carbon [water, unspecified]: 5.93281e-10 kg
- Water [water, unspecified]: 5.91504e-7 m3

## Sampling procedure
The 2 Swiss HWI plants, used as the inventory reference technology mix, have a total annual capacity of 53'000 tons of hazardous waste. This corresponds to 39% of the Swiss total installed capacity in 2000. Swiss average plants size is 20'000 t/a.

## Extrapolations
Available waste composition data. Transfer coefficients from one modern HWI completed with data from MSWI. Waste-specific auxiliary material consumption adapted from MSWI. This dataset has been copied from an original dataset covering the geography CH. The uncertainty has been adjusted accordingly.
