# N-methyl-2-pyrrolidone production

Dataset: EcoSpold 2, unit process
Geography: RoW
Time period: 2015-01-01 to 2022-12-31
Technology level: current
Classification: ISIC rev.4 ecoinvent: 2011:Manufacture of basic chemicals
Scenario: Business-as-Usual
System model: Allocation at the point of substitution
Generated by: [System]
Database: ecoinvent
isCopyrightProtected: true

## General comment
Methylpyrolidone is mainly used as a solvent. Other areas of use are in the processing of petroleum distillates, engineering plastics, paints, chemicals for agriculture application, electronics, and as a component of cleaning agents (Harreus et al. 2011).

## Included activities start
The activity starts when the raw materials enter the process.

## Included activities end
Materials entering the process are included as well as energy uses, infrastructure and emissions.

## Geography
The inputs to the process are calculated based on stoichiometry and literature data, they are therefore considered to be valid for the chosen geography. The inputs of heat, electricity, water, factory and nitrogen are mostly taken as average of industry data. Industry data values are a 5-year average of data (2011 - 2015) published by the Gendorf factory (Gendorf, 2016, Umwelterklärung, www.gendorf.de), (Gendorf, 2015, Umwelterklärung, www.gendorf.de), (Gendorf, 2014, Umwelterklärung, www.gendorf.de). The Gendorf factory is based in Germany, it produces a wide range of chemical substances. The factory produced 1657400 tonnes of chemical substances in the year 2015 (Gendorf, 2016, Umwelterklärung, www.gendorf.de) and 740000 tonnes of intermediate products. Given the range of chemicals produced by the german site, the values are used for the GLO geography, with uncertainty adjusted accordingly.

## Technology
The main production route for methylpyrolidone is the reaction of gamma-Butyrolactone and methylamine. The reaction takes place in a high-pressure tube, with pressure between 6 and 12 MPa. The exothermic reaction requires temperatures between 250 and 400 degrees Celsius. This reaction is often an adiabatic process. The product of this reaction is then decompressed and distilled. The efficiency of the reaction is over 97% (Harreus et al. 2011).

## Reference product
- N-methyl-2-pyrrolidone: 1 kg; By-product classification allocatable product; CPC 341: Basic organic chemicals; CAS 872-50-4
  production volume 1.8585e8 kg
    Literature value. Harreus et al. 2011 report a word capacity of 200 to 250 thousand tons per year, the main producers reported are: BASF, ISP, Lyondell-Basell, and Mitsubishi. The Chinese production is predicted to increase (Harreus et al. 2011).
    Reference(s):
    Harreus, A.L. et al. 2011. 2-Pyrrolidone. In Ullmann's Encyclopedia of Industrial Chemistry, Electronic Release, pp.2-4. Wiley-VCH, Weinheim.
  property heating value, net 29.36 MJ
    LHV is calculated based on the elemental composition of the substance. Based on the CAS number of the substance (000872-50-4), the chemical formula of the substance is found to be: C5H9NO, (PubChem 2020).
    Reference: Kim, S., Chen, J., Cheng, T., Gindulyte, A., He, J., He, S., Li, Q., Shoemaker, B. A., Thiessen, P. A., Yu, B., Zaslavsky, L., Zhang, J., & Bolton, E. E. (2019). PubChem 2019 update: improved access to chemical data. Nucleic acids research, 47(D1), D1102–D1109. https://doi.org/10.1093/nar/gky1033
  property price 16.626 EUR2005
    Calculated based on inputs: The price of the product has been calculated as a sum of the values of the material and energy inputs for this product. This value is therefore a rough estimation. It may underestimate the real price since there are additional expenses when producing any product. These expences can include for example labour costs, treatment of waste materials and profit for the producer. Please consider carefully whether this level of data quality is acceptable for your application.
  properties: carbon allocation 0.585366 kg, carbon content 0.585366, carbon content, fossil 0.585366, carbon content, non-fossil 0, dry mass 1 kg, water content 0, water in wet mass 0 kg, wet mass 1 kg

## Inputs from technosphere
- butyrolactone: 0.895296 kg
  properties: carbon content, fossil 0.55814, dry mass 1 kg, heating value, net 25.35 MJ, wet mass 1 kg
- chemical factory, organics: 4e-10 unit
- electricity, medium voltage: 0.0947985, 0.0295802, 0.000880897, 0.0044947, 0.271401, 0.0148452 kWh (6 suppliers, which the file names only by identifier); sum of these 0.416 kWh
- heat, district or industrial, natural gas: 2.11524, 0.0347588 MJ (2 suppliers, which the file names only by identifier); sum of these 2.15 MJ
  properties: heating value, net 1 MJ
- heat, from steam, in chemical industry: 0.2 MJ
  properties: heating value, net 1 MJ
- methylamine: 0.322981 kg
  properties: carbon content, fossil 0.386735, dry mass 1 kg, heating value, net 31.23 MJ, wet mass 1 kg
- nitrogen, liquid: 0.019 kg
  properties: dry mass 1 kg, wet mass 1 kg
- tap water: 4.8717e-5, 0.00203022, 8.05128e-5, 0.000150233, 0.0232328, 5.28156e-5, 0.000404717 kg (7 suppliers, which the file names only by identifier); sum of these 0.026 kg
  properties: carbon content, fossil 0.00178991, dry mass 0.000337476 kg, water content 2962.17, wet mass 1 kg
  note on carbon content, fossil: Bicarbonate content is 2.93 mol/m3. CO2 content is 0.1 mol/m3 (ecoinvent v2.2 report 8, Tab 93.1).
- wastewater, average: -9.57892e-9, -2.69042e-6 m3 (2 suppliers, which the file names only by identifier); sum of these -2.7e-6 m3
  production volume
    Calculated from the production volume of the reference product in proportion to the respective output amounts.
  properties: carbon content, non-fossil 0.194039, dry mass 0.346837 kg, water content 2882.2, wet mass 1000 kg
  note on carbon content, non-fossil: 0.0673 kg TOC/m3 (Tab A.17, ecoinvent v2.2 report 13_I). TOC was considered as Total Carbon.

## Inputs from nature
- Water, cooling, unspecified natural origin [natural resource, in water]: 0.0164 m3
- Water, river [natural resource, in water]: 0.00086 m3
- Water, well, in ground [natural resource, in water]: 0.00083 m3

## Emissions to nature
- Carbon dioxide, fossil [air, unspecified]: 0.0521754 kg
- Methylamine [air, unspecified]: 0.000968944 kg
- Nitrogen [air, unspecified]: 0.019 kg
- Water [air, unspecified]: 0.0014 m3
- BOD5, Biological Oxygen Demand [water, unspecified]: 0.00215644 kg
- Butyrolactone [water, unspecified]: 0.00134294 kg
- COD, Chemical Oxygen Demand [water, unspecified]: 0.00215644 kg
- DOC, Dissolved Organic Carbon [water, unspecified]: 0.000748763 kg
- TOC, Total Organic Carbon [water, unspecified]: 0.000748763 kg
- Water [water, unspecified]: 0.0167 m3
