# nuclear spent fuel conditioning facility construction

Dataset: EcoSpold 2, unit process
Geography: RoW
Time period: 2002-01-01 to 2022-12-31
Technology level: current
Classification: ISIC rev.4 ecoinvent: 4290:Construction of other civil engineering projects
Classification: EcoSpold01Categories: nuclear power/waste treatment
Tags: ConvertedDataset
Scenario: Business-as-Usual
System model: Allocation at the point of substitution
Generated by: Roberto Dones
Published in: Dones, R. 2007
Database: ecoinvent
isCopyrightProtected: true

## General comment
The assumed area and the volume of the building have been estimated from a preliminary aerial view. Concrete for shielding and weight of mashines are rough estimations.
[This dataset was already contained in the ecoinvent database version 2. It was not individually updated during the transfer to ecoinvent version 3. Life Cycle Impact Assessment results may still have changed, as they are affected by changes in the supply chain, i.e. in other datasets. This dataset was generated following the ecoinvent quality guidelines for version 2. It may have been subject to central changes described in the ecoinvent version 3 change report (http://www.ecoinvent.org/database/ecoinvent-version-3/reports-of-changes/), and the results of the central updates were reviewed extensively. The changes added e.g. consistent water flows and other information throughout the database. The documentation of this dataset can be found in the ecoinvent reports of version 2, which are still available via the ecoinvent website. The change report linked above covers all central changes that were made during the conversion process.]

## Included activities end
It includes land use, building, cranes and other mashines, concrete for shielding and its lining, transport of materials and mashines, and disposal of concrete for shielding. The disposal of the building is in the used module.

## Geography
Swiss conditions

## Technology
Estimation of current technologies

## Reference product
- nuclear spent fuel conditioning facility: 1 unit; By-product classification allocatable product; CPC 54290: General construction services of other civil engineering works
  EcoSpold01Location=CH
  production volume 3.19121 unit
    Calculated from electricity demand, using the input/output relationships of the datasets
  property price 1.20512e8 EUR2005
    EU27 I/O database(in the 'EU & DK Input Output Database' (available in SimaPro)); -79 Building, non-residential EU 27 (calculated to be 38.169 EUR2003/kg). Based on consumption of (_53 Iron basic, virgin, EU27;7.25517782294095E-3 kg/EUR building; 0.45 EUR2003 per kg DS), (_61 Iron, after first processing, EU27;5.8766830719783E-3kg/EUR building; 0.62 EUR2003 per kg DS), (_65 Fabricated metal products, except machinery, EU27; 8.9167022775554E-3 kg/EUR building; 3.63 EUR2003 per kg DS) and (_66 Machinery and equipment n.e.c., EU27;4.15071881936446E-3 kg/EUR building; 5.71 EUR2003 per kg DS) -3181500 kg
  properties: carbon allocation 0 kg, carbon content 0

## Inputs from technosphere
- building, multi-storey: 130000 m3; lognormal variance with pedigree 0.162, pedigree (1,1,5,5,1)
  EcoSpold01Location=RER
  own assumption
- concrete, normal strength: 2.93892, 0.560541, 0.41978, 6.19368, 0.645373, 5.22475, 221.571, 12.4455 m3 (8 suppliers, which the file names only by identifier); sum of these 250 m3; lognormal variance with pedigree 0.342, pedigree (1,1,5,5,1)
  own assumption
  EcoSpold01Location=CH
  properties: dry mass 2190 kg, water content 0.086758, wet mass 2380 kg
- industrial machine, heavy, unspecified: 50000 kg; lognormal variance with pedigree 0.342, pedigree (1,1,5,5,1)
  own assumption
  EcoSpold01Location=RER
- steel, chromium steel 18/8, hot rolled: 5000 kg; lognormal variance with pedigree 0.342, pedigree (1,1,5,5,1)
  own assumption
  EcoSpold01Location=RER
  properties: carbon content, fossil 0.0008, dry mass 1 kg, wet mass 1 kg
  note on carbon content, fossil: Stainless steel model is the grade 304 steel (18/8 stainless, 18% chromium 8% nickel; max. 0.08% C)
- waste concrete, not reinforced: -39288.2, -560712 kg (2 suppliers, which the file names only by identifier); sum of these -600000 kg; lognormal variance with pedigree 0.302, pedigree (1,1,1,5,1)
  own assumption
  EcoSpold01Location=CH
  production volume
    Calculated from the production volume of nuclear spent fuel conditioning facility in proportion to the respective output amounts.
  properties: dry mass 1 kg, wet mass 1 kg

## Inputs from nature
- Occupation, industrial area [natural resource, land]: 450000 m2*year; lognormal variance with pedigree 0.252, pedigree (1,1,5,5,1)
  own estimation
- Transformation, from industrial area [natural resource, land]: 22500 m2; lognormal variance with pedigree 0.162, pedigree (1,1,5,5,1)
  own estimation
- Transformation, from unspecified [natural resource, land]: 22500 m2; lognormal variance with pedigree 0.162, pedigree (1,1,5,5,1)
  own estimation
- Transformation, to industrial area [natural resource, land]: 22500 m2; lognormal variance with pedigree 0.162, pedigree (1,1,5,5,1)
  own estimation
- Transformation, to unspecified [natural resource, land]: 22500 m2; lognormal variance with pedigree 0.162, pedigree (1,1,5,5,1)
  own estimation

## Sampling procedure
Literature

## Extrapolations
none This dataset has been copied from an original dataset covering the geography CH. The uncertainty has been adjusted accordingly.

## Review by Roberto Dones 2003-08-19
passed
for final calculation August 2003
