# treatment of sewage sludge, 97% water, WWT, WW from soft fibreboard production, landfarming

Dataset: EcoSpold 2, unit process
Geography: CH
Time period: 2000-01-01 to 2022-12-31
Technology level: current
Classification: ISIC rev.4 ecoinvent: 3821:Treatment and disposal of non-hazardous waste
Scenario: Business-as-Usual
System model: Allocation at the point of substitution
Generated by: Nikolia Stoikou
Database: ecoinvent
isCopyrightProtected: true

## General comment
The process represents the treatment of a waste (sewage sludge) that is exclusively produced from another waste treatment. Recommended use of this dataset: to be used within the specific chain of treatments for 'wastewater from soft fibreboard production'. Share of biogenic carbon in the sludge: 98.95%.

## Included activities start
The activity starts with the waste being available for landfarming. Collection and transportation of the waste to this process is not included.

## Included activities end
The activity ends with the waste being treated and waste-specific emissions from the landfarming process are released to the environment (air, water and soil). The activity is considering local fate of emissions and the initial specific wastewater composition (generating the sewage sludge). Further, it includes provision of fertiliser functions for N, P, K, if present in the sludge.

## Geography
The site has mean annual temperature (MAT) of 9.5 degC, mean annual precipitation (MAP) of 1483.00559816076 mm/year, mean annual actual evaporation (EAT) of 528.63778611689 mm/year. Climate will influence the local fate emissions based on the elemental composition of the sludge as well as water evaporation to air (= consumptive water use).
References: UN data, 2020. Precipitation, Environment Statistics Database, United Nations Statistics Division Available at: http://data.un.org/Data.aspx?q=precipitation&d=ENV&f=variableID%3a6;
World Bank, 2022. Surface area (sq.km), World Bank Group Available at: https://data.worldbank.org/indicator/AG.SRF.TOTL.K2;
MeteoSwiss, 2022. Data on Swiss temperature mean, Federal Department of Home Affairs FDHA. Federal Office of Meteorology and Climatology. Swiss Climate Available at: https://www.MeteoSwiss.admin.ch/home/climate/swiss-climate-in-detail/Swiss-temperature-mean/Data-on-the-Swiss-temperature-mean.html?query=TEMPERATURE+DATA&topic=/content/MeteoSwiss/tags/topics/klima&pageIndex=0&tab=search_tab;
Doka G.,2021. A model for composition-specific life cycle inventories of regionalised wastewater fates, Zurich, Switzerland. http://www.doka.ch/publications.htm

## Technology
Landfarming is the process of spreading a substrate on agricultural soil. Sewage sludge is generated in the wastewater treatment of wastewater from soft fibreboard production. Spreading of liquid sewage sludge (97w% water content) on agricultural fields with mobile vacuum tanker.

## Reference product
- organic phosphorus fertiliser, as P2O5: 1 kg; By-product classification allocatable product; CPC 34659: Fertilizers n.e.c.; lognormal variance with pedigree 0.24216, pedigree (1,1,1,1,1)
  gross fertilizer function provided from sewage sludge spreading on agricultural fields.
  Uncertainty: Uncertainty calculated from upstream wastewater technosphere fate uncertainty, wastewater composition uncertainty, and treatment model uncertainty
  production volume 0.0349357 kg
    Calculated in proportion to wastewater reference product.
  property oxygen content 0.563579
    Oxygen content (on a dry matter basis) of organic phosphorus fertiliser, as P2O5 is calculated from the molecular formula of the substance (Phosphorus).
  property phosphorus content 0.436421
    Phosphorus content (on a dry matter basis) of organic phosphorus fertiliser, as P2O5 is calculated from the molecular formula of the substance (Phosphorus).
  property price 0.241 EUR2005
    Set equal to the price of the corresponding inorganic fertiliser
  properties: carbon allocation 0 kg, carbon content 0, carbon content, fossil 0, carbon content, non-fossil 0, dry mass 1 kg, water content 0, water in wet mass 0 kg, wet mass 1 kg

## Inputs from technosphere
- acrylic dispersion, with water, in 58% solution state: 2.62616e-7 kg
- acrylic varnish, with water, in 53% solution state: 8.62881e-8 kg
- aluminium scrap, post-consumer: -5.49507e-6 kg
- aluminium sulfate, powder: 0.000142078 kg
- aluminium, wrought alloy: 5.49507e-6 kg
- corrugated board box: 5.79584e-6, 1.34527e-5, 2.15895e-7 kg (3 suppliers, which the file names only by identifier); sum of these 1.94645e-5 kg
- electricity, low voltage: 4.49133e-6, 8.90078e-6, 8.55014e-5, 1.52522e-6, 3.0558e-5, 2.77367e-7, 2.11815e-5, 6.23743e-6 kWh (8 suppliers, which the file names only by identifier); sum of these 0.000158673 kWh
- electricity, medium voltage: 0.169766 kWh
- ethylene glycol monoethyl ether: 1.15639e-7 kg
- furnace, wood chips, with silo, 1000kW: 8.99051e-9 unit
- heat, district or industrial, natural gas: 9.29254e-5, 0.000251623, 4.13481e-6, 0.640543 MJ (4 suppliers, which the file names only by identifier); sum of these 0.640892 MJ
- heat, district or industrial, other than natural gas: 0.225431 MJ
- industrial machine, heavy, unspecified: 4.81095e-8 kg
- inert waste, for final disposal: -0.000128367 kg
- isopropanol: 4.81095e-7 kg
- latex: 0.00256477 kg
- maize starch: 3.79579e-8 kg
- municipal solid waste: -0.0041938 kg
- paper, woodfree, coated: 0.000306753 kg
- paraffin: 0.00179683 kg
- printing ink, offset, without solvent, in 47.5% solution state: 2.04576e-6 kg
- pulpwood, softwood, measured as solid wood under bark: 4.3628e-6 m3
- raw sewage sludge: -0.00933777 kg
- sheet rolling, aluminium: 5.49507e-6 kg
- slab and siding, softwood, wet, measured as dry mass: 0.0297653 kg
- spent solvent mixture: -2.38024e-7, -9.30043e-8 kg (2 suppliers, which the file names only by identifier); sum of these -3.31028e-7 kg
- synthetic rubber: 3.95027e-8 kg
- tap water: 0.714634 kg
- textile, woven cotton: 6.22334e-8 kg
- thermoforming, with calendering: 8.78329e-8 kg
- vinyl acetate: 0.00327378 kg
- waste emulsion paint: -5.68723e-8, -5.36103e-9 kg (2 suppliers, which the file names only by identifier); sum of these -6.22334e-8 kg
- waste paper, unsorted: -4.30337e-5, -4.30337e-5 kg (2 suppliers, which the file names only by identifier); sum of these -8.60674e-5 kg
- waste paperboard, unsorted: -9.73224e-6, -9.73224e-6 kg (2 suppliers, which the file names only by identifier); sum of these -1.94645e-5 kg
- wastewater from soft fibreboard production: -0.000483984 m3
- white spirit: 6.73091e-7 kg
- wood ash mixture, pure: -0.000204332 kg
- wood chips, dry, measured as dry mass: 0.302567 kg
- wooden board factory, organic bonded boards: 1.07023e-11 unit

## Inputs from nature
- Water, cooling, unspecified natural origin [natural resource, in water]: 0.00145589 m3

## Emissions to nature
- 2-Propanol [air, urban air close to ground]: 4.81095e-7 kg
- Acetaldehyde [air, unspecified]: 2.49285e-8 kg
- Ammonia [air, unspecified]: 7.06989e-7 kg
- Arsenic ion [air, unspecified]: 4.08664e-10 kg
- Benzene [air, unspecified]: 3.71884e-7 kg
- Benzene, ethyl- [air, unspecified]: 1.22599e-8 kg
- Benzene, ethyl- [air, urban air close to ground]: 2.13844e-8 kg
- Benzene, hexachloro- [air, unspecified]: 2.94238e-15 kg
- Benzo(a)pyrene [air, unspecified]: 2.04332e-10 kg
- Bromine [air, unspecified]: 2.45198e-8 kg
- Cadmium II [air, unspecified]: 2.86065e-10 kg
- Calcium [air, unspecified]: 2.39069e-6 kg
- Carbon dioxide, non-fossil [air, unspecified]: 0.0437271 kg
- Carbon monoxide, non-fossil [air, unspecified]: 0.000122599 kg
- Chlorine [air, unspecified]: 7.35595e-8 kg
- Chromium III [air, unspecified]: 1.61831e-9 kg
- Chromium VI [air, unspecified]: 1.63466e-11 kg
- Copper ion [air, unspecified]: 8.99061e-9 kg
- Dinitrogen monoxide [air, unspecified]: 9.39927e-7 kg
- Dioxins, measured as 2,3,7,8-tetrachlorodibenzo-p-dioxin [air, unspecified]: 1.26686e-14 kg
- Fluorine [air, unspecified]: 2.04332e-8 kg
- Formaldehyde [air, unspecified]: 5.31263e-8 kg
- Heptane [air, urban air close to ground]: 2.0921e-7 kg
- Hydrocarbons, aliphatic, alkanes, unspecified [air, unspecified]: 3.71884e-7 kg
- Hydrocarbons, aliphatic, unsaturated [air, unspecified]: 1.26686e-6 kg
- Lead II [air, unspecified]: 1.02166e-8 kg
- Magnesium [air, unspecified]: 1.47119e-7 kg
- Manganese II [air, unspecified]: 6.94729e-8 kg
- Mercury II [air, unspecified]: 1.22599e-10 kg
- Methane, non-fossil [air, unspecified]: 1.22599e-6 kg
- Methanol [air, urban air close to ground]: 2.20686e-8 kg
- NMVOC, non-methane volatile organic compounds [air, unspecified]: 1.35344e-5 kg
- Nickel II [air, unspecified]: 2.45198e-9 kg
- Nitrogen oxides [air, unspecified]: 9.19494e-5 kg
- PAH, polycyclic aromatic hydrocarbons [air, unspecified]: 4.53617e-9 kg
- Particulate Matter, < 2.5 um [air, unspecified]: 1.83899e-5 kg
- Particulate Matter, > 10 um [air, urban air close to ground]: 1.17346e-5 kg
- Particulate Matter, > 2.5 um and < 10um [air, unspecified]: 1.02166e-6 kg
- Phenol, pentachloro- [air, unspecified]: 3.31018e-12 kg
- Phosphorus [air, unspecified]: 1.22599e-7 kg
- Potassium I [air, unspecified]: 9.56274e-6 kg
- Propylene oxide [air, urban air close to ground]: 4.01648e-8 kg
- Sodium [air, unspecified]: 5.31263e-7 kg
- Sulfur dioxide [air, unspecified]: 1.02166e-6 kg
- Toluene [air, unspecified]: 1.22599e-7 kg
- Toluene [air, urban air close to ground]: 1.88907e-8 kg
- Water [air, unspecified]: 0.000871448 m3
- Xylene [air, urban air close to ground]: 1.88907e-8 kg
- Zinc II [air, unspecified]: 1.22599e-7 kg
- m-Xylene [air, unspecified]: 4.90397e-8 kg
- Water [water, unspecified]: 0.000815087 m3
