# treatment of waste wood, untreated, municipal incineration

Dataset: EcoSpold 2, unit process
Geography: RoW
Time period: 2006-01-01 to 2022-12-31
Technology level: current
Classification: ISIC rev.4 ecoinvent: 3821:Treatment and disposal of non-hazardous waste
Synonyms: municipal waste incineration; Siedlungsabfallverbrennung; Kehrichtverbrennung
Scenario: Business-as-Usual
System model: Allocation at the point of substitution
Generated by: Gabor Doka
Published in: Doka G. 2013
Database: ecoinvent
isCopyrightProtected: true

## General comment
This dataset represents the activity of waste disposal of waste wood, untreated in a municipal solid waste incinerator (MSWI) // Recommended use of this dataset: For small amounts of wood, which go to disposal as part of communal waste mixture. // // Waste composition (wet, in ppm): upper heating value 15.36 MJ/kg; lower heating value 13.99 MJ/kg; H2O 174080; O 372180; H 50163; C 401470; S 125.51; N 986.98; P 108.97; B 2.1107; Cl 330.95; Br n.a.; F 21.106; I n.a.; Ag n.a.; As 0.42213; Ba n.a.; Cd 0.20051; Co 0.086772; Cr 0.65782; Cu 4.1482; Hg 0.31976; Mn 53.118; Mo 0.8302; Ni 0.55581; Pb 27.868; Sb n.a.; Se n.a.; Sn n.a.; V n.a.; Zn 17.807; Be n.a.; Sc n.a.; Sr n.a.; Ti n.a.; Tl n.a.; W n.a.; Si n.a.; Fe 15.479; Ca 130.89; Al 6.3322; K 65.412; Mg 197.56; Na 14.071; // Share of carbon in waste that is biogenic 100%. // Share of metals in waste not oxidised and bulk-recyclable (exclude very small or thin parts) Iron: 0%; Alu: 0%; Copper: 0%. // One kg of this waste produces 0.007032 kg of slag and 0.002349 kg of residues, which are landfilled. Additional solidification with 0.0009395 kg of cement. // Net energy production: 1.74MJ/kg electric energy and 3.49MJ/kg thermal energy. // Recovery of metal scrap to recycling: 0g iron scrap, 0g aluminium scrap, 0g copper scrap.

## Included activities start
waste incineration from waste reception gate and delivery into waste bunker at incinerator plant site (without transports to the incinerator)

## Included activities end
Waste-specific short-term emissions to water from leachate. Long-term emissions from landfill to ground water.

## Geography
Specific to the technology mix encountered in Switzerland in 2010. Well applicable to modern incineration practices in Europe, North America or Japan.

## Technology
average Swiss MSWI plants in 2010 (grate incinerators) with electrostatic precipitator for fly ash (ESP), wet flue gas scrubber and 25% SNCR , 42.77% SCR-high dust , 32.68% SCR-low dust -DeNOx facilities and 0% without Denox (weighted according to mass of burnt waste, representing Swiss average). Efficiency of iron scrap separation from slag : 58%. Efficiency of non-ferrous scrap separation from slag : 31%. Gross electric efficiency technology mix 15.84% and Gross thermal efficiency technology mix 28.51%

## Time period
Waste composition as given in literature reference, theoretical data or other source. Transfer coefficients for modern MSWI.

## Reference product
- electricity, for reuse in municipal waste incineration only: 1 kWh; name E_el_prod_MSWI; By-product classification allocatable product; CPC 17100: Electrical energy; lognormal variance with pedigree 0.13036, pedigree (1,1,1,1,1)
  Net electricity generated from this waste and used in internal MSWI plant energy redistribution.
  Uncertainty: uncertainty is calculated from uncertainties in waste composition and uncertainties in energy efficiency and the uncertainty in internal energy demand
  production volume 4.04656e10 kWh
    calculated in proportion to reference product waste input to incinerator
  property exergy 3.6 MJ; name E_el_prod_MSWI_exergy
    This exergy property is based on the exergy content of the product.
  property price 0.1 EUR2005
    Estimated to be the same price as in case of electricity, medium voltage.
  property true value relation 3.6; name E_el_prod_MSWI_true_value_relation
    property to calculate "true value" from
  properties: carbon allocation 0 kg, carbon content 0

## Inputs from technosphere
- EDTA, ethylenediaminetetraacetic acid: 4.71609e-6 kg
- EUR-flat pallet: 7.87142e-16 unit
- [sulfonyl]urea-compound: 3.85725e-6 kg
- [thio]carbamate-compound: 6.046e-7 kg
- acetamide-anillide-compound, unspecified: 3.04754e-5 kg
- acrylic dispersion, with water, in 58% solution state: 5.0425e-9 kg
- acrylic varnish, with water, in 53% solution state: 1.65682e-9 kg
- adipic acid: 5.48559e-12 kg
- alkyd paint, white, without solvent, in 60% solution state: 1.92911e-10, 3.80107e-15 kg (2 suppliers, which the file names only by identifier); sum of these 1.92914e-10 kg
- aluminium scrap, post-consumer: -1.23223e-7 kg
- aluminium sulfate, powder: 6.60321e-5, 5.97091e-5 kg (2 suppliers, which the file names only by identifier); sum of these 0.000125741 kg
- aluminium, cast alloy: 2.81482e-7 kg
- aluminium, wrought alloy: 1.49842e-5 kg
- ammonia, anhydrous, liquid: 1.53582e-6, 1.64146e-7, 2.06747e-6, 1.98529e-5, 6.0301e-6, 1.02102e-6, 4.5824e-7, 1.73597e-5, 1.44054e-5 kg (9 suppliers, which the file names only by identifier); sum of these 6.28948e-5 kg
- ammonium nitrate: 0.000159745, 0.000366962, 0.000387739, 0.000692885 kg (4 suppliers, which the file names only by identifier); sum of these 0.00160733 kg
- ammonium sulfate: 9.26355e-5, 0.000117071 kg (2 suppliers, which the file names only by identifier); sum of these 0.000209707 kg
- application of plant protection product, by field sprayer: 7.63775e-5, 6.14478e-8 ha (2 suppliers, which the file names only by identifier); sum of these 7.64389e-5 ha
- ash from paper production sludge: -4.02184e-5, -7.23182e-7, -2.76663e-5 kg (3 suppliers, which the file names only by identifier); sum of these -6.86079e-5 kg
- bark chips, wet, measured as dry mass: 4.47844e-6, 0.00021979, 6.62383e-5, 9.08686e-7 kg (4 suppliers, which the file names only by identifier); sum of these 0.000291415 kg
- benzimidazole-compound: 8.0119e-7 kg
- biogas: 4.96953e-7, 8.97468e-7 m3 (2 suppliers, which the file names only by identifier); sum of these 1.39442e-6 m3
- biowaste: -0.0182934, -0.000120009 kg (2 suppliers, which the file names only by identifier); sum of these -0.0184134 kg
- bipyridylium-compound: 2.01079e-6 kg
- blasting: 3.54695e-6 kg
- boric acid, anhydrous, powder: 1.00054e-5 kg
- brass: 4.89258e-8, 2.45858e-10 kg (2 suppliers, which the file names only by identifier); sum of these 4.91717e-8 kg
- bronze: 6.45544e-16 kg
- cable, unspecified: 4.2116e-7 kg
- calcium ammonium nitrate: 6.80975e-6 kg
- calcium carbonate, precipitated: 9.31967e-7, 1.79618e-7 kg (2 suppliers, which the file names only by identifier); sum of these 1.11159e-6 kg
- carbon dioxide, liquid: 1.16574e-6, 8.22876e-7 kg (2 suppliers, which the file names only by identifier); sum of these 1.98861e-6 kg
- cast iron: 3.55529e-5 kg
- cement mortar: 1.40033e-10 kg
- cement, Portland: 6.16495e-5, 1.50606e-6, 2.26816e-6, 2.3272e-6, 5.62363e-5, 4.21523e-5, 2.89297e-6, 0.00111489 kg (8 suppliers, which the file names only by identifier); sum of these 0.00128392 kg
- chemical factory, organics: 1.53317e-12, 1.64944e-12 unit (2 suppliers, which the file names only by identifier); sum of these 3.18261e-12 unit
- chemical, inorganic: 5.13449e-5 kg
- chemical, organic: 0.000208845 kg
- chlorine dioxide: 1.19053e-6, 2.41023e-6 kg (2 suppliers, which the file names only by identifier); sum of these 3.60076e-6 kg
- clay brick: 4.03985e-10 kg
- clay pit infrastructure: 5.33464e-13 unit
- cobalt: 4.92913e-8 kg
- coke: 8.98623e-6 MJ
- compost: 0.00236527 kg
- concrete, normal strength: 2.00847e-7, 3.84246e-8, 2.86878e-8, 3.89336e-7, 4.41049e-8, 1.08089e-7, 3.5706e-7, 1.51422e-5, 8.50529e-7, 5.80303e-9 m3 (10 suppliers, which the file names only by identifier); sum of these 1.71651e-5 m3
- conveyor belt: 5.35256e-20 m
- copper oxide: 3.66713e-5 kg
- copper scrap, sorted, pressed: -1.86435e-9 kg
- copper, cathode: 3.42066e-5 kg
- corrugated board box: 1.11286e-7, 2.58307e-7, 4.14542e-9 kg (3 suppliers, which the file names only by identifier); sum of these 3.73739e-7 kg
- cyclic N-compound: 2.47125e-5 kg
- diesel: 1.83769e-6, 1.08583e-7, 1.86054e-7, 3.84021e-6, 1.28723e-7, 1.81463e-5, 4.37738e-8 kg (7 suppliers, which the file names only by identifier); sum of these 2.42913e-5 kg
- diesel, burned in agricultural machinery: 0.00867205 MJ
- diesel, burned in building machine: 0.000290484 MJ
- diesel, low-sulfur: 1.67424e-8, 4.035e-7, 3.3857e-7, 7.5825e-9, 1.12098e-9, 3.37924e-8, 1.69018e-8 kg (7 suppliers, which the file names only by identifier); sum of these 8.1821e-7 kg
- digester sludge: -4.6772e-7 kg
- dinitroaniline-compound: 1.91803e-7 kg
- diphenylether-compound: 5.4047e-7 kg
- dithiocarbamate-compound: 1.17037e-5 kg
- dolomite: 1.28321e-5, 6.79732e-6 kg (2 suppliers, which the file names only by identifier); sum of these 1.96294e-5 kg
- electricity, high voltage: 6.08694e-9, 1.92206e-7, 4.36072e-5, 1.87632e-6, 1.0362e-7, 3.10937e-8, 2.06881e-7, 9.76056e-15, 4.35435e-7, 1.61233e-8 kWh (10 suppliers, which the file names only by identifier); sum of these 4.64749e-5 kWh
- electricity, low voltage: 1.85173e-7, 1.60031e-6, 5.02743e-8, 6.98735e-7, 1.67284e-7, 2.87934e-8, 2.0099e-7, 2.25247e-7, 1.54918e-7, 8.54717e-7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 kWh (74 suppliers, which the file names only by identifier); sum of these 0.000448203 kWh
- electricity, medium voltage: 3.04267e-8, 4.10838e-8, 1.28439e-8, 5.90863e-8, 1.23338e-8, 3.61485e-8, 1.06409e-5, 7.22432e-7, 3.60168e-9, 9.6263e-10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 kWh (116 suppliers, which the file names only by identifier); sum of these 0.0692871 kWh
- electronics scrap: -8.37065e-8 kg
- energy and auxilliary inputs, metal working factory: 1.01411e-14, 2.26144e-15 kg (2 suppliers, which the file names only by identifier); sum of these 1.24025e-14 kg
- epoxy resin insulator, SiO2: 6.45544e-16 kg
- establishing orchard: 0.00117674 unit
- ethoxylated alcohol (AE3): 1.23708e-5, 1.14988e-5 kg (2 suppliers, which the file names only by identifier); sum of these 2.38696e-5 kg
- ethoxylated alcohol (AE7): 1.14988e-5, 1.23708e-5 kg (2 suppliers, which the file names only by identifier); sum of these 2.38696e-5 kg
- ethoxylated alcohol (AE>20): 2.85185e-8 kg
- ethylene glycol: 7.1362e-12 kg
- ethylene glycol monoethyl ether: 2.2204e-9 kg
- excavation, hydraulic digger: 1.88255e-5 m3
- excavation, skid-steer loader: 7.23048e-7 m3
- extrusion, plastic film: 2.09936e-12, 1.13268e-13 kg (2 suppliers, which the file names only by identifier); sum of these 2.21263e-12 kg
- extrusion, plastic pipes: 1.45523e-6 kg
- fatty alcohol: 7.24775e-9 kg
- fertilising, by broadcaster: 4.09647e-8, 3.50286e-5 ha (2 suppliers, which the file names only by identifier); sum of these 3.50695e-5 ha
- fibre cement corrugated slab: 3.267e-11 kg
- fibre cement facing tile: 0.00205422 kg
- fibre cement roof slate: 0.000360636 kg
- fibre, cotton: 1.93663e-15 kg
- flat glass, coated: 6.9903e-12 kg
- flat glass, uncoated: 2.41748e-11 kg
- fruit tree seedling, for planting: 0.00117674 unit
- furnace, wood chips, softwood storage area, 1000kW: 3.20018e-14 unit
- glued laminated timber, average glue mix: 3.36799e-7, 7.31252e-7 m3 (2 suppliers, which the file names only by identifier); sum of these 1.06805e-6 m3
- glyphosate: 5.88142e-5 kg
- gravel, round: 0.0200052 kg
- green liquor dregs: -2.8891e-5 kg
- gypsum, mineral: 0.000333561, 2.0147e-6, 1.5641e-6, 7.0202e-7 kg (4 suppliers, which the file names only by identifier); sum of these 0.000337842 kg
- hard coal: 1.82953e-9, 2.42757e-9, 1.10074e-9, 2.59774e-8, 7.79023e-9, 1.12328e-9, 4.73359e-10, 4.77689e-10, 2.61199e-10 kg (9 suppliers, which the file names only by identifier); sum of these 4.1461e-8 kg
- harvesting, forestry harvester: 5.64232e-8 hour
- hazardous waste, for incineration: -5.36098e-6, -4.85909e-6, -1.27014e-7 kg (3 suppliers, which the file names only by identifier); sum of these -1.03471e-5 kg
- hazardous waste, for underground deposit: -1.43149e-7, -1.01046e-7 kg (2 suppliers, which the file names only by identifier); sum of these -2.44195e-7 kg
- heat, central or small-scale, other than natural gas: 5.10968e-5, 0.0123092 MJ (2 suppliers, which the file names only by identifier); sum of these 0.0123603 MJ
- heat, district or industrial, natural gas: 0.00096388, 1.46337e-5, 1.78427e-6, 0.000692507, 1.13619e-5 MJ (5 suppliers, which the file names only by identifier); sum of these 0.00168417 MJ
- heat, district or industrial, other than natural gas: 0.0338082, 0.0324948, 1.3621e-6, 3.40128e-10, 0.000187082, 0.000764179 MJ (6 suppliers, which the file names only by identifier); sum of these 0.0672556 MJ
- heavy fuel oil: 0.000160498, 1.35052e-6, 6.86578e-6, 1.43645e-6, 1.73252e-6, 2.31923e-6, 3.98689e-5 kg (7 suppliers, which the file names only by identifier); sum of these 0.000214071 kg
- hoeing: 1.73879e-7 ha
- hydrazine: 8.08677e-11 kg
- hydrochloric acid, without water, in 30% solution state: 4.83308e-8, 1.99813e-8 kg (2 suppliers, which the file names only by identifier); sum of these 6.8312e-8 kg
- hydrogen peroxide, without water, in 50% solution state: 0.000111766, 0.000263411 kg (2 suppliers, which the file names only by identifier); sum of these 0.000375177 kg
- industrial machine, heavy, unspecified: 9.23753e-10 kg
- inorganic nitrogen fertiliser, as N: 1.39312e-5, 1.34056e-8, 2.4861e-5, 3.72168e-9, 5.90636e-6, 5.27303e-7, 1.15562e-7, 6.17115e-8, 1.28799e-6, 8.14972e-9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 kg (69 suppliers, which the file names only by identifier); sum of these 0.000632298 kg
- inorganic phosphorus fertiliser, as P2O5: 2.27443e-8, 0.000452917, 4.9624e-7, 2.08059e-7, 2.95347e-5, 1.66503e-6, 1.45127e-5, 2.26151e-7, 1.99013e-8, 2.32612e-8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 kg (66 suppliers, which the file names only by identifier); sum of these 0.00148624 kg
- inorganic potassium fertiliser, as K2O: 1.03244e-5, 7.16539e-8, 1.21839e-7, 3.75381e-8, 8.57708e-8, 5.97829e-7, 5.36631e-8, 4.30004e-5, 6.25461e-5, 1.37745e-6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 kg (65 suppliers, which the file names only by identifier); sum of these 0.000345871 kg
- irrigation: 0.00319894, 8.56219e-5, 5.5882e-5, 1.29056e-6, 0.000230004, 0.00135056, 0.0263649, 0.000689016, 0.00524991, 5.01799e-5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 m3 (18 suppliers, which the file names only by identifier); sum of these 0.0756847 m3
- isopropanol: 9.23753e-9 kg
- kaolin: 1.38566e-7 kg
- kraft paper: 2.67628e-14 kg
- land use change, perennial crop: 1.40405e-6, 5.76311e-7, 1.91434e-6, 1.76974e-8, 4.10808e-8, 7.63388e-8, 9.30217e-8, 1.51253e-9, 1.47623e-10, 1.65031e-7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 ha (17 suppliers, which the file names only by identifier); sum of these 5.50172e-6 ha
- lead: 1.03287e-14 kg
- lean concrete: 4.748e-7 m3
- light fuel oil: 6.27342e-7, 6.22687e-8, 5.98722e-9, 2.4346e-6, 4.4495e-9, 4.13207e-9, 3.0853e-8 kg (7 suppliers, which the file names only by identifier); sum of these 3.16963e-6 kg
- lignite briquettes: 0.000821351, 0.00116358 MJ (2 suppliers, which the file names only by identifier); sum of these 0.00198493 MJ
- lime: 0.000142853, 0.00196477 kg (2 suppliers, which the file names only by identifier); sum of these 0.00210763 kg
- limestone residue: -3.0194e-5, -3.7233e-5 kg (2 suppliers, which the file names only by identifier); sum of these -6.7427e-5 kg
- linseed seed, at farm: 4.88627e-6 kg
- liquid manure spreading, by vacuum tanker: 1.49704e-5 m3
- lubricating oil: 0.000113611, 0.000105451 kg (2 suppliers, which the file names only by identifier); sum of these 0.000219062 kg
- magnesium oxide: 1.33204e-5 kg
- magnesium sulfate: 9.98109e-7 kg
- maize starch: 2.59757e-6 kg
- malusil: 5.91004e-7 kg
- mancozeb: 1.37945e-7 kg
- manganese: 1.1977e-10 kg
- manganese concentrate: 6.27878e-7 kg
- manganese(III) oxide: 4.30329e-6 kg
- mango seedling, for planting: 2.12422e-6 unit
- manure, liquid, cattle: 0.0121182 kg
- manure, liquid, swine: 0.0036335 kg
- manure, solid, cattle: 0.0150063 kg
- marine electric motor: 1.51703e-18 unit
- marine engine: 1.51703e-17 unit
- metal working factory: 1.24025e-14 unit
- metal working, average for steel product manufacturing: 3.55372e-13 kg
- methanol: 1.16427e-7 kg
- methanol, from biomass: 6.98682e-7, 3.19899e-7 kg (2 suppliers, which the file names only by identifier); sum of these 1.01858e-6 kg
- molybdenum trioxide: 2.86359e-8 kg
- mowing, by motor mower: 2.64064e-5 ha
- mowing, by rotary mower: 3.24846e-6 ha
- mulching: 2.69962e-5 ha
- municipal solid waste: -3.67862e-9, -6.086e-6, -1.33401e-9, -2.6201e-6, -9.33489e-10 kg (5 suppliers, which the file names only by identifier); sum of these -8.71205e-6 kg
- naphtha: 1.16119e-6, 4.6483e-5, 4.13175e-6, 1.55713e-6, 2.22343e-8, 1.78061e-7, 8.75132e-6 kg (7 suppliers, which the file names only by identifier); sum of these 6.22847e-5 kg
- natural gas, high pressure: 2.06523e-7, 8.71741e-8, 4.9927e-7, 1.48164e-7, 8.38177e-6, 8.56684e-7, 9.3514e-8, 2.75946e-9, 3.32054e-7, 3.48696e-7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 m3 (26 suppliers, which the file names only by identifier); sum of these 4.76915e-5 m3
- nickel, class 1: 6.43142e-8 kg
- nitric acid, without water, in 50% solution state: 6.05106e-6, 0.000114988, 8.99094e-6, 2.23588e-5, 2.90769e-5, 1.07132e-5, 3.68464e-5, 8.95766e-6, 7.12932e-7 kg (9 suppliers, which the file names only by identifier); sum of these 0.000238696 kg
- nitrile-compound: 5.71325e-7 kg
- nylon 6-6: 3.60587e-14, 1.55848e-14 kg (2 suppliers, which the file names only by identifier); sum of these 5.16435e-14 kg
- organophosphorus-compound, unspecified: 1.53011e-5 kg
- oriented strand board: 6.95959e-9, 4.25832e-9 m3 (2 suppliers, which the file names only by identifier); sum of these 1.12179e-8 m3
- oxygen, liquid: 1.1939e-5, 9.26417e-6 kg (2 suppliers, which the file names only by identifier); sum of these 2.12032e-5 kg
- ozone, liquid: 1.56534e-9, 3.82162e-9 kg (2 suppliers, which the file names only by identifier); sum of these 5.38696e-9 kg
- packaging film, low density polyethylene: 7.75449e-6 kg
- packaging, for fertilisers: 0.0179779 kg
- packaging, for pesticides: 0.000573416 kg
- packing, clay product: 0.0031944 kg
- paper mill, integrated: 3.83195e-14, 5.42858e-14 unit (2 suppliers, which the file names only by identifier); sum of these 9.26053e-14 unit
- paper, woodfree, coated: 5.88998e-6 kg
- paraffin: 7.72515e-5 kg
- particleboard, uncoated: 7.90491e-13 m3
- peat: 1.06278e-7, 1.4181e-7 kg (2 suppliers, which the file names only by identifier); sum of these 2.48087e-7 kg
- pendimethalin: 6.98993e-8 kg
- pesticide, unspecified: 1.81313e-6 kg
- petrol, unleaded, burned in machinery: 0.000327798 MJ
- phenol: 2.16441e-9, 6.75497e-9 kg (2 suppliers, which the file names only by identifier); sum of these 8.91938e-9 kg
- phenolic resin: 5.90718e-9, 2.80421e-8 kg (2 suppliers, which the file names only by identifier); sum of these 3.39493e-8 kg
- phenoxy-compound: 2.05113e-6 kg
- phosphate rock, beneficiated: 2.23488e-5, 0.000420975, 3.5513e-6, 3.62505e-6 kg (4 suppliers, which the file names only by identifier); sum of these 0.0004505 kg
- phosphoric acid, industrial grade, without water, in 85% solution state: 2.3445e-9 kg
- phthalimide-compound: 4.26156e-5 kg
- planting tree: 0.00112683 unit
- planting with starter fertiliser, by no till planter: 5.64503e-9 ha
- plywood: 7.49393e-10, 1.06615e-8 m3 (2 suppliers, which the file names only by identifier); sum of these 1.14109e-8 m3
- polydimethylsiloxane: 5.16385e-9 kg
- polyethylene, high density, granulate: 1.45523e-6 kg
- polyethylene, low density, granulate: 7.95652e-6 kg
- polystyrene foam slab: 2.90097e-11 kg
- polyurethane, flexible foam: 6.08818e-8, 1.24698e-8 kg (2 suppliers, which the file names only by identifier); sum of these 7.33516e-8 kg
- polyvinylchloride, bulk polymerised: 3.57665e-6 kg
- polyvinylchloride, emulsion polymerised: 8.40912e-12 kg
- polyvinylchloride, suspension polymerised: 5.74621e-11 kg
- portafer: 1.59309e-6 kg
- potassium chloride: 0.00164692, 0.000138278 kg (2 suppliers, which the file names only by identifier); sum of these 0.00178519 kg
- potassium sulfate: 0.000251465, 0.000556512 kg (2 suppliers, which the file names only by identifier); sum of these 0.000807977 kg
- potato starch: 1.77082e-5 kg
- poultry manure, dried: 0.00416811 kg
- poultry manure, fresh: 0.000345975 kg
- printed wiring board, surface mounted, unspecified, Pb free: 4.20434e-8 kg
- printing ink, offset, without solvent, in 47.5% solution state: 3.92807e-8 kg
- propane: 2.972e-9 kg
- propane, burned in building machine: 2.63532e-7 MJ
- pulp factory: 4.74151e-13, 2.01939e-13 unit (2 suppliers, which the file names only by identifier); sum of these 6.7609e-13 unit
- pulpwood, hardwood, measured as solid wood under bark: 2.01123e-7, 1.53415e-7 m3 (2 suppliers, which the file names only by identifier); sum of these 3.54538e-7 m3
- pulpwood, softwood, measured as solid wood under bark: 3.65732e-7, 1.0835e-6, 3.58101e-6, 3.37068e-7, 1.15338e-6 m3 (5 suppliers, which the file names only by identifier); sum of these 6.52069e-6 m3
- pyrethroid-compound: 1.09316e-6 kg
- quicklime, milled, loose: 2.51906e-5, 3.13682e-5 kg (2 suppliers, which the file names only by identifier); sum of these 5.65588e-5 kg
- rape oil, crude: 6.43195e-10, 3.95531e-7 kg (2 suppliers, which the file names only by identifier); sum of these 3.96175e-7 kg
- reinforcing steel: 0.000489533 kg
- residual softwood, wet: 1.20281e-5, 2.79942e-5 m3 (2 suppliers, which the file names only by identifier); sum of these 4.00222e-5 m3
- retention aid, for paper production: 3.45423e-11 kg
- rosin size, for paper production: 2.30674e-7, 3.26787e-7 kg (2 suppliers, which the file names only by identifier); sum of these 5.57461e-7 kg
- sawlog and veneer log, eucalyptus ssp., measured as solid wood under bark: 1.83024e-5, 3.36862e-7, 1.27859e-7 m3 (3 suppliers, which the file names only by identifier); sum of these 1.87671e-5 m3
- sawlog and veneer log, softwood, measured as solid wood under bark: 1.22682e-10 m3
- sawnwood, board, hardwood, dried (u=20%), planed: 9.28185e-19, 4.0952e-15, 2.45152e-16 m3 (3 suppliers, which the file names only by identifier); sum of these 4.34128e-15 m3
- sawnwood, hardwood, raw, dried (u=20%): 1.32908e-7, 3.27013e-7 m3 (2 suppliers, which the file names only by identifier); sum of these 4.59921e-7 m3
- sawnwood, softwood, dried (u=10%), planed: 3.2233e-14, 1.40033e-13 m3 (2 suppliers, which the file names only by identifier); sum of these 1.72266e-13 m3
- sawnwood, softwood, dried (u=20%), planed: 1.25015e-5 m3
- sawnwood, softwood, raw, dried (u=10%): 3.76947e-9, 9.0582e-9 m3 (2 suppliers, which the file names only by identifier); sum of these 1.28277e-8 m3
- scrap aluminium: -5.50066e-5, -2.58078e-6, -6.20419e-5 kg (3 suppliers, which the file names only by identifier); sum of these -0.000119629 kg
- scrap copper: -7.37098e-9, -1.0987e-5, -2.31341e-5 kg (3 suppliers, which the file names only by identifier); sum of these -3.41284e-5 kg
- scrap steel: -1.37707e-8, -1.9543e-5, -1.0869e-5 kg (3 suppliers, which the file names only by identifier); sum of these -3.04258e-5 kg
- sheet rolling, aluminium: 1.05511e-7 kg
- sheet rolling, copper: 3.36331e-5 kg
- sheet rolling, steel: 9.46073e-11 kg
- slab and siding, softwood, wet, measured as dry mass: 2.93252e-5, 0.000125993, 0.000114926, 1.61829e-6 kg (4 suppliers, which the file names only by identifier); sum of these 0.000271863 kg
- sludge from pulp and paper production: -2.17073e-7, -1.95891e-5, -2.51884e-5 kg (3 suppliers, which the file names only by identifier); sum of these -4.49946e-5 kg
- soda ash, light: 3.3848e-6 kg
- sodium chlorate, powder: 5.00296e-5, 5.2736e-5 kg (2 suppliers, which the file names only by identifier); sum of these 0.000102766 kg
- sodium chloride, powder: 3.23856e-6 kg
- sodium formate: 4.63199e-8, 1.1147e-7 kg (2 suppliers, which the file names only by identifier); sum of these 1.5779e-7 kg
- sodium hydrogen sulfite: 4.89712e-7 kg
- sodium hydroxide, without water, in 50% solution state: 0.00115501 kg
- sodium hypochlorite, without water, in 15% solution state: 2.15923e-8, 1.76262e-9 kg (2 suppliers, which the file names only by identifier); sum of these 2.33549e-8 kg
- sodium silicate, spray powder, 80%: 6.7327e-5, 0.000153689 kg (2 suppliers, which the file names only by identifier); sum of these 0.000221016 kg
- sodium sulfate, anhydrite: 3.96675e-6, 3.62255e-6 kg (2 suppliers, which the file names only by identifier); sum of these 7.5893e-6 kg
- solid manure loading and spreading, by hydraulic loader and spreader: 0.0167675 kg
- solvent, organic: 6.33389e-12 kg
- spent antifreezer liquid: -3.77727e-12 kg
- spent solvent mixture: -4.57308e-9, -1.78578e-9 kg (2 suppliers, which the file names only by identifier); sum of these -6.35886e-9 kg
- steel, low-alloyed: 1.86024e-5 kg
- steel, low-alloyed, hot rolled: 3.86653e-6 kg
- stone wool, packed: 7.38631e-11 kg
- sugar, from sugar beet: 5.73531e-10 kg
- sulfate pulp, bleached: 5.34576e-5, 3.20747e-5, 5.66024e-6 kg (3 suppliers, which the file names only by identifier); sum of these 9.11925e-5 kg
- sulfate pulp, unbleached: 4.95456e-8, 3.49734e-8 kg (2 suppliers, which the file names only by identifier); sum of these 8.4519e-8 kg
- sulfite: 3.26241e-5, 3.11709e-5 kg (2 suppliers, which the file names only by identifier); sum of these 6.3795e-5 kg
- sulfur: 2.05047e-5 kg
- sulfuric acid: 0.000614103, 0.000574573 kg (2 suppliers, which the file names only by identifier); sum of these 0.00118868 kg
- swath, by rotary windrower: 1.73879e-7 ha
- synthetic rubber: 4.00459e-7 kg
- tap water: 1.70726e-7, 7.35366e-6, 2.91626e-7, 6.63212e-5, 5.4416e-7, 8.41517e-5, 1.91304e-7, 1.4621e-6 kg (8 suppliers, which the file names only by identifier); sum of these 0.000160486 kg
- textile, woven cotton: 1.19495e-9 kg
- thermoforming, with calendering: 1.68648e-9 kg
- tillage, harrowing, by offset leveling disc harrow: 1.12848e-8 ha
- tillage, harrowing, by rotary harrow: 1.23355e-5 ha
- tillage, ploughing: 1.83055e-6 ha
- tillage, rolling: 3.07882e-7 ha
- tillage, subsoiling, by subsoiler plow: 5.64233e-9 ha
- transport, freight train: 0.000334346, 3.11269e-6, 3.99971e-6 metric ton*km (3 suppliers, which the file names only by identifier); sum of these 0.000341458 metric ton*km
- transport, freight, inland waterways, barge: 0.000138199, 1.20261e-6 metric ton*km (2 suppliers, which the file names only by identifier); sum of these 0.000139402 metric ton*km
- transport, freight, lorry >32 metric ton, EURO5: 0.000306912 metric ton*km
- transport, freight, lorry, unspecified: 3.83234e-6 metric ton*km
- transport, freight, sea, bulk carrier for dry goods: 0.000369857 metric ton*km
- transport, freight, sea, container ship: 2.17011e-5 metric ton*km
- transport, tractor and trailer, agricultural: 0.00023835, 4.39853e-7 metric ton*km (2 suppliers, which the file names only by identifier); sum of these 0.000238789 metric ton*km
- trellis system, wooden poles, soft wood, tar impregnated: 8.00541e-6 ha
- triazine-compound, unspecified: 1.28757e-6 kg
- urea: 0.000192282, 0.00192142, 0.000120433, 0.00101294 kg (4 suppliers, which the file names only by identifier); sum of these 0.00324707 kg
- urea ammonium nitrate mix: 1.78066e-5 kg
- urea formaldehyde resin: 0.000837197, 0.000175405 kg (2 suppliers, which the file names only by identifier); sum of these 0.0010126 kg
- used cable: -4.2116e-7 kg
- used printed wiring boards: -4.20434e-8 kg
- used purse seiner, wood: -3.22859e-12 kg
- waste bitumen sheet: -0.000105406, -0.000113399 kg (2 suppliers, which the file names only by identifier); sum of these -0.000218804 kg
- waste brick: -0.00238347, -3.13848e-5, -5.28736e-11 kg (3 suppliers, which the file names only by identifier); sum of these -0.00241486 kg
- waste building wood, chrome preserved: -0.00232089 kg
- waste bulk iron, excluding reinforcement: -2.40067e-5, -1.15448e-5, -9.82841e-13 kg (3 suppliers, which the file names only by identifier); sum of these -3.55514e-5 kg
- waste cement in concrete and mortar: -0.000637163, -0.00161529, -4.07961e-12 kg (3 suppliers, which the file names only by identifier); sum of these -0.00225246 kg
- waste concrete: -9.8405e-9, -3.79409e-5, -4.22656e-8 kg (3 suppliers, which the file names only by identifier); sum of these -3.7993e-5 kg
- waste concrete, not reinforced: -6.83976e-5, -0.000976153 kg (2 suppliers, which the file names only by identifier); sum of these -0.00104455 kg
- waste emulsion paint: -1.09201e-9, -1.02937e-10 kg (2 suppliers, which the file names only by identifier); sum of these -1.19495e-9 kg
- waste fibreboard: -7.26495e-10 kg
- waste glass sheet: -1.17978e-11, -1.73554e-13, -1.91937e-11 kg (3 suppliers, which the file names only by identifier); sum of these -3.1165e-11 kg
- waste graphical paper: -5.23002e-15, -1.81356e-5, -4.22197e-7, -1.16841e-7, -1.02167e-8, -4.11677e-8, -1.42138e-5, -7.65146e-7, -7.62057e-8 kg (9 suppliers, which the file names only by identifier); sum of these -3.37812e-5 kg
- waste mineral oil: -3.64353e-9, -8.85833e-8, -1.47177e-7 kg (3 suppliers, which the file names only by identifier); sum of these -2.39404e-7 kg
- waste mineral wool: -5.029e-11, -3.3287e-14, -2.35397e-11 kg (3 suppliers, which the file names only by identifier); sum of these -7.38631e-11 kg
- waste packaging paper: -2.65493e-8, -7.08429e-10, -1.08619e-9, -3.38448e-18, -3.92486e-9, -7.11301e-9, -9.49774e-11, -3.82706e-10 kg (8 suppliers, which the file names only by identifier); sum of these -3.98595e-8 kg
- waste paper, unsorted: -8.26293e-7, -8.26293e-7 kg (2 suppliers, which the file names only by identifier); sum of these -1.65259e-6 kg
- waste paperboard, unsorted: -1.86869e-7, -1.86869e-7 kg (2 suppliers, which the file names only by identifier); sum of these -3.73739e-7 kg
- waste plastic, mixture: -6.06174e-6, -3.06312e-8, -6.75827e-8, -5.71779e-5, -4.24355e-5, -4.05022e-7, -1.58856e-7, -1.67289e-7 kg (8 suppliers, which the file names only by identifier); sum of these -0.000106505 kg
- waste polyethylene: -1.61883e-7, -1.37932e-7, -4.24236e-9, -1.13327e-6, -1.08164e-8, -8.18025e-10, -4.46755e-9, -1.80484e-9 kg (8 suppliers, which the file names only by identifier); sum of these -1.45523e-6 kg
- waste polyethylene/polypropylene product: -8.12274e-14, -3.20406e-14 kg (2 suppliers, which the file names only by identifier); sum of these -1.13268e-13 kg
- waste polystyrene isolation, flame-retardant: -8.2061e-12, -2.08036e-11 kg (2 suppliers, which the file names only by identifier); sum of these -2.90097e-11 kg
- waste polyvinylchloride: -2.00726e-9, -1.04099e-8, -4.4287e-9, -1.09625e-8, -2.65412e-8, -3.97227e-7, -3.4427e-7, -2.78081e-6 kg (8 suppliers, which the file names only by identifier); sum of these -3.57665e-6 kg
- waste polyvinylchloride product: -6.18014e-14, -2.03756e-12 kg (2 suppliers, which the file names only by identifier); sum of these -2.09936e-12 kg
- waste reinforced concrete: -0.00241618, -5.68719e-12, -0.0344831 kg (3 suppliers, which the file names only by identifier); sum of these -0.0368993 kg
- waste rubber, unspecified: -8.18967e-9, -1.95086e-7, -1.95086e-7 kg (3 suppliers, which the file names only by identifier); sum of these -3.98361e-7 kg
- waste sealing sheet, polyethylene: -2.09936e-12 kg
- waste textile, soiled: -5.08506e-6, -5.89448e-6 kg (2 suppliers, which the file names only by identifier); sum of these -1.09795e-5 kg
- waste wood, untreated: -1.77366e-5, -4.31098e-5, -3.05174e-6, -2.37215e-5, -9.72753e-6, -1.96129e-5, -2.69065e-6, -1.59989e-5, -4.85368e-7, -2.27196e-5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 kg (45 suppliers, which the file names only by identifier); sum of these -0.0429367 kg
- wastewater from particle board production: -1.65603e-8, -6.81764e-8 m3 (2 suppliers, which the file names only by identifier); sum of these -8.47366e-8 m3
- wastewater, unpolluted: -0.00176075, -0.00189428 m3 (2 suppliers, which the file names only by identifier); sum of these -0.00365503 m3
- water, decarbonised: 1.22383, 0.0178233, 0.304739, 0.000959844, 1.51164, 0.00800614, 1.00204, 1.03887, 0.657735, 0.0837566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 kg (12 suppliers, which the file names only by identifier); sum of these 5.96739 kg
- weed control, by brush cutter, pasture: 1.01517e-6 ha
- white spirit: 1.00749e-6 kg
- wire drawing, copper: 6.45544e-15 kg
- wood ash mixture, pure: -5.01377e-7, -2.43902e-5, -1.47154e-5 kg (3 suppliers, which the file names only by identifier); sum of these -3.9607e-5 kg
- wood chipping, chipper, mobile, diesel, at forest road: 7.41812e-8 hour
- wood chips, dry, measured as dry mass: 0.000114654, 0.000123349 kg (2 suppliers, which the file names only by identifier); sum of these 0.000238003 kg
- wood chips, wet, measured as dry mass: 8.49411e-5, 1.54901e-6, 0.000443598, 0.000705138, 3.23167e-6 kg (5 suppliers, which the file names only by identifier); sum of these 0.00123846 kg
- wood pellet, measured as dry mass: 1.2561e-6, 5.14499e-7 kg (2 suppliers, which the file names only by identifier); sum of these 1.77059e-6 kg
- wooden board factory, organic bonded boards: 4.70288e-13 unit
- zinc: 9.48372e-7 kg
- zinc coat, coils: 3.71159e-11 m2
- zinc coat, pieces: 2.46989e-6 m2
- zinc monosulfate: 4.11658e-6, 7.79259e-7 kg (2 suppliers, which the file names only by identifier); sum of these 4.89584e-6 kg
- zinc oxide: 1.64891e-6 kg

## Inputs from nature
- Carbon dioxide, in air [natural resource, in air]: 0.0970089 kg
- Energy, gross calorific value, in biomass [natural resource, biotic]: 1.16426 MJ
- Occupation, annual crop, irrigated [natural resource, land]: 0.00171289 m2*year
- Occupation, construction site [natural resource, land]: 6.80752e-5 m2*year
- Occupation, industrial area [natural resource, land]: 5.24949e-5 m2*year
- Occupation, permanent crop [natural resource, land]: 0.00213344 m2*year
- Occupation, permanent crop, irrigated [natural resource, land]: 0.283269 m2*year
- Occupation, urban, discontinuously built [natural resource, land]: 0.00340376 m2*year
- Oxygen [natural resource, in air]: 0.00399129 kg
- Transformation, from annual crop, irrigated [natural resource, land]: 0.00330936 m2
- Transformation, from pasture, man made [natural resource, land]: 6.80752e-5 m2
- Transformation, from permanent crop [natural resource, land]: 0.000106672 m2
- Transformation, from permanent crop, irrigated [natural resource, land]: 0.011336 m2
- Transformation, from unspecified [natural resource, land]: 2.62474e-6 m2
- Transformation, to annual crop, irrigated [natural resource, land]: 0.00330936 m2
- Transformation, to industrial area [natural resource, land]: 2.62474e-6 m2
- Transformation, to permanent crop [natural resource, land]: 0.000106672 m2
- Transformation, to permanent crop, irrigated [natural resource, land]: 0.011336 m2
- Transformation, to urban, discontinuously built [natural resource, land]: 6.80752e-5 m2
- Water, cooling, unspecified natural origin [natural resource, in water]: 5.75574e-5 m3
- Water, unspecified natural origin [natural resource, in ground]: 4.22762e-5 m3
- Water, unspecified natural origin [natural resource, in water]: 0.000282537 m3
- Water, well, in ground [natural resource, in water]: 1.23398e-5 m3

## Emissions to nature
- 2-Propanol [air, non-urban air or from high stacks]: 6.96758e-11 kg
- 2-Propanol [air, urban air close to ground]: 9.23753e-9 kg
- 4-Methyl-2-pentanone [air, non-urban air or from high stacks]: 1.52272e-12 kg
- Acetaldehyde [air, non-urban air or from high stacks]: 3.91e-11 kg
- Acetaldehyde [air, urban air close to ground]: 5.59655e-10 kg
- Acetic acid [air, non-urban air or from high stacks]: 1.26255e-11 kg
- Acetic acid [air, urban air close to ground]: 8.13629e-10 kg
- Acetone [air, non-urban air or from high stacks]: 3.01766e-12 kg
- Acetone [air, urban air close to ground]: 1.22282e-10 kg
- Acrolein [air, non-urban air or from high stacks]: 1.69518e-11 kg
- Aluminium III [air, urban air close to ground]: 2.37587e-8 kg
- Ammonia [air, non-urban air or from high stacks]: 0.000527931 kg
- Ammonia [air, unspecified]: 1.65752e-6 kg
- Ammonia [air, urban air close to ground]: 3.16069e-7 kg
- Antimony ion [air, urban air close to ground]: 5.02974e-11 kg
- Arsenic ion [air, non-urban air or from high stacks]: 3.10295e-13 kg
- Arsenic ion [air, urban air close to ground]: 1.18353e-10 kg
- Barium II [air, urban air close to ground]: 5.04092e-10 kg
- Benzene [air, non-urban air or from high stacks]: 4.93416e-11 kg
- Benzene [air, urban air close to ground]: 1.73025e-8 kg
- Benzene, ethyl- [air, non-urban air or from high stacks]: 2.31467e-12 kg
- Benzene, ethyl- [air, urban air close to ground]: 6.24642e-10 kg
- Benzene, hexachloro- [air, non-urban air or from high stacks]: 5.55516e-19 kg
- Benzene, hexachloro- [air, urban air close to ground]: 5.1369e-17 kg
- Benzo(a)pyrene [air, non-urban air or from high stacks]: 1.56434e-14 kg
- Benzo(a)pyrene [air, urban air close to ground]: 4.33648e-11 kg
- Beryllium II [air, urban air close to ground]: 5.04092e-12 kg
- Boron [air, urban air close to ground]: 2.26613e-8 kg
- Bromine [air, non-urban air or from high stacks]: 4.62942e-12 kg
- Bromine [air, urban air close to ground]: 4.5838e-10 kg
- Butane [air, non-urban air or from high stacks]: 2.60154e-12 kg
- Butane [air, urban air close to ground]: 1.56777e-9 kg
- Cadmium II [air, non-urban air or from high stacks]: 1.15992e-13 kg
- Cadmium II [air, urban air close to ground]: 2.03332e-11 kg
- Calcium [air, non-urban air or from high stacks]: 4.53582e-10 kg
- Calcium [air, urban air close to ground]: 1.42204e-7 kg
- Carbon dioxide, fossil [air, non-urban air or from high stacks]: 0.00343679 kg
- Carbon dioxide, fossil [air, unspecified]: 0.000690614 kg
- Carbon dioxide, fossil [air, urban air close to ground]: 0.000382525 kg
- Carbon dioxide, from soil or biomass stock [air, non-urban air or from high stacks]: 0.0216377 kg
- Carbon dioxide, non-fossil [air, non-urban air or from high stacks]: 2.56055e-5 kg
- Carbon dioxide, non-fossil [air, unspecified]: 0.0019906 kg
- Carbon dioxide, non-fossil [air, urban air close to ground]: 0.00510234 kg
- Carbon monoxide, fossil [air, non-urban air or from high stacks]: 1.0013e-8 kg
- Carbon monoxide, fossil [air, unspecified]: 1.36384e-7 kg
- Carbon monoxide, fossil [air, urban air close to ground]: 1.30669e-6 kg
- Carbon monoxide, non-fossil [air, non-urban air or from high stacks]: 4.6622e-7 kg
- Carbon monoxide, non-fossil [air, unspecified]: 2.58447e-5 kg
- Carbon monoxide, non-fossil [air, urban air close to ground]: 3.42236e-6 kg
- Chlorine [air, non-urban air or from high stacks]: 1.38884e-11 kg
- Chlorine [air, urban air close to ground]: 1.28423e-9 kg
- Chromium III [air, non-urban air or from high stacks]: 7.37744e-13 kg
- Chromium III [air, urban air close to ground]: 1.71834e-10 kg
- Chromium VI [air, non-urban air or from high stacks]: 2.78142e-14 kg
- Chromium VI [air, urban air close to ground]: 1.76142e-12 kg
- Cobalt II [air, non-urban air or from high stacks]: 6.63917e-13 kg
- Cobalt II [air, urban air close to ground]: 1.02257e-10 kg
- Copper ion [air, urban air close to ground]: 3.41579e-10 kg
- Dinitrogen monoxide [air, non-urban air or from high stacks]: 7.69097e-5 kg
- Dinitrogen monoxide [air, unspecified]: 4.03127e-7 kg
- Dinitrogen monoxide [air, urban air close to ground]: 6.00802e-8 kg
- Dioxins, measured as 2,3,7,8-tetrachlorodibenzo-p-dioxin [air, non-urban air or from high stacks]: 2.29064e-20 kg
- Dioxins, measured as 2,3,7,8-tetrachlorodibenzo-p-dioxin [air, urban air close to ground]: 2.25858e-16 kg
- Ethane [air, urban air close to ground]: 2.98263e-8 kg
- Ethanol [air, non-urban air or from high stacks]: 6.03567e-12 kg
- Ethanol [air, urban air close to ground]: 2.44563e-10 kg
- Ethylene [air, urban air close to ground]: 5.96527e-8 kg
- Ethyne [air, urban air close to ground]: 9.94211e-9 kg
- Fluorine [air, non-urban air or from high stacks]: 3.85784e-12 kg
- Fluorine [air, urban air close to ground]: 3.56729e-10 kg
- Formaldehyde [air, non-urban air or from high stacks]: 1.70947e-10 kg
- Formaldehyde [air, unspecified]: 2.11842e-6 kg
- Formaldehyde [air, urban air close to ground]: 1.86286e-9 kg
- Heat, waste [air, non-urban air or from high stacks]: 0.000469851 MJ
- Heptane [air, urban air close to ground]: 4.01705e-9 kg
- Hydrocarbons, aliphatic, alkanes, unspecified [air, non-urban air or from high stacks]: 8.23039e-11 kg
- Hydrocarbons, aliphatic, alkanes, unspecified [air, unspecified]: 2.31613e-8 kg
- Hydrocarbons, aliphatic, alkanes, unspecified [air, urban air close to ground]: 1.70051e-8 kg
- Hydrocarbons, aliphatic, unsaturated [air, non-urban air or from high stacks]: 2.39791e-10 kg
- Hydrocarbons, aliphatic, unsaturated [air, urban air close to ground]: 3.20838e-8 kg
- Hydrocarbons, aromatic [air, non-urban air or from high stacks]: 3.01891e-12 kg
- Hydrocarbons, aromatic [air, urban air close to ground]: 1.27369e-10 kg
- Hydrochloric acid [air, non-urban air or from high stacks]: 9.96389e-11 kg
- Hydrochloric acid [air, urban air close to ground]: 8.17885e-9 kg
- Hydrogen fluoride [air, non-urban air or from high stacks]: 9.66111e-13 kg
- Hydrogen fluoride [air, urban air close to ground]: 2.99872e-10 kg
- Hydrogen sulfide [air, non-urban air or from high stacks]: 1.1902e-11 kg
- Hydrogen sulfide [air, urban air close to ground]: 4.67303e-8 kg
- Iodine [air, urban air close to ground]: 9.05427e-11 kg
- Iron ion [air, non-urban air or from high stacks]: 1.64972e-11 kg
- Iron ion [air, urban air close to ground]: 2.7742e-8 kg
- Lead II [air, non-urban air or from high stacks]: 9.10469e-13 kg
- Lead II [air, urban air close to ground]: 1.05905e-10 kg
- Lead-210 [air, urban air close to ground]: 1.23691e-7 kBq
- Magnesium [air, non-urban air or from high stacks]: 1.29416e-11 kg
- Magnesium [air, urban air close to ground]: 1.76714e-8 kg
- Manganese II [air, non-urban air or from high stacks]: 1.31167e-11 kg
- Manganese II [air, urban air close to ground]: 1.26339e-9 kg
- Mercury II [air, non-urban air or from high stacks]: 2.01403e-14 kg
- Mercury II [air, urban air close to ground]: 1.05911e-11 kg
- Methane, fossil [air, non-urban air or from high stacks]: 7.14102e-11 kg
- Methane, fossil [air, urban air close to ground]: 4.95364e-8 kg
- Methane, non-fossil [air, non-urban air or from high stacks]: 4.55967e-9 kg
- Methane, non-fossil [air, urban air close to ground]: 8.29441e-8 kg
- Methanol [air, non-urban air or from high stacks]: 1.96616e-9 kg
- Methanol [air, urban air close to ground]: 8.39497e-10 kg
- Methyl ethyl ketone [air, non-urban air or from high stacks]: 1.82478e-11 kg
- Molybdenum VI [air, non-urban air or from high stacks]: 1.60953e-13 kg
- Molybdenum VI [air, urban air close to ground]: 9.44132e-11 kg
- NMVOC, non-methane volatile organic compounds [air, non-urban air or from high stacks]: 8.28094e-10 kg
- NMVOC, non-methane volatile organic compounds [air, unspecified]: 5.0842e-6 kg
- NMVOC, non-methane volatile organic compounds [air, urban air close to ground]: 1.3974e-6 kg
- Nickel II [air, non-urban air or from high stacks]: 1.10651e-12 kg
- Nickel II [air, urban air close to ground]: 5.55537e-10 kg
- Nitrogen oxides [air, non-urban air or from high stacks]: 0.000119706 kg
- Nitrogen oxides [air, unspecified]: 3.19918e-6 kg
- Nitrogen oxides [air, urban air close to ground]: 2.05098e-5 kg
- PAH, polycyclic aromatic hydrocarbons [air, non-urban air or from high stacks]: 6.2987e-12 kg
- PAH, polycyclic aromatic hydrocarbons [air, urban air close to ground]: 1.01378e-10 kg
- Particulate Matter, < 2.5 um [air, non-urban air or from high stacks]: 8.43126e-9 kg
- Particulate Matter, < 2.5 um [air, unspecified]: 3.61762e-7 kg
- Particulate Matter, < 2.5 um [air, urban air close to ground]: 1.66201e-8 kg
- Particulate Matter, > 10 um [air, non-urban air or from high stacks]: 2.37861e-10 kg
- Particulate Matter, > 10 um [air, unspecified]: 1.12982e-6 kg
- Particulate Matter, > 10 um [air, urban air close to ground]: 1.51742e-7 kg
- Particulate Matter, > 2.5 um and < 10um [air, non-urban air or from high stacks]: 1.34034e-10 kg
- Particulate Matter, > 2.5 um and < 10um [air, unspecified]: 1.23959e-6 kg
- Particulate Matter, > 2.5 um and < 10um [air, urban air close to ground]: 1.85644e-7 kg
- Pentane [air, non-urban air or from high stacks]: 4.44579e-12 kg
- Pentane [air, urban air close to ground]: 2.63164e-9 kg
- Phenol [air, non-urban air or from high stacks]: 2.90512e-11 kg
- Phenol [air, urban air close to ground]: 9.93704e-10 kg
- Phenol, pentachloro- [air, non-urban air or from high stacks]: 6.24976e-16 kg
- Phenol, pentachloro- [air, urban air close to ground]: 5.77902e-14 kg
- Phosphorus [air, non-urban air or from high stacks]: 1.41206e-11 kg
- Phosphorus [air, urban air close to ground]: 2.34175e-9 kg
- Polonium-210 [air, urban air close to ground]: 2.27426e-7 kBq
- Potassium I [air, non-urban air or from high stacks]: 1.80549e-9 kg
- Potassium I [air, urban air close to ground]: 1.69983e-7 kg
- Potassium-40 [air, urban air close to ground]: 3.33266e-8 kBq
- Propanal [air, non-urban air or from high stacks]: 1.84871e-11 kg
- Propane [air, non-urban air or from high stacks]: 1.34391e-12 kg
- Propane [air, urban air close to ground]: 2.03448e-8 kg
- Propanol [air, non-urban air or from high stacks]: 4.39703e-15 kg
- Propene [air, urban air close to ground]: 9.94211e-9 kg
- Propionic acid [air, non-urban air or from high stacks]: 7.3945e-14 kg
- Propionic acid [air, urban air close to ground]: 4.3267e-11 kg
- Propylene oxide [air, urban air close to ground]: 7.71207e-10 kg
- Radium-226 [air, urban air close to ground]: 3.19202e-8 kBq
- Radium-228 [air, urban air close to ground]: 1.77508e-8 kBq
- Radon-220 [air, urban air close to ground]: 7.95977e-9 kBq
- Radon-222 [air, urban air close to ground]: 7.95977e-9 kBq
- Scandium [air, urban air close to ground]: 1.26882e-12 kg
- Selenium IV [air, non-urban air or from high stacks]: 1.06248e-13 kg
- Selenium IV [air, urban air close to ground]: 1.60524e-10 kg
- Silicon [air, urban air close to ground]: 2.40637e-7 kg
- Sodium [air, non-urban air or from high stacks]: 1.15394e-10 kg
- Sodium [air, urban air close to ground]: 1.44042e-8 kg
- Strontium [air, urban air close to ground]: 5.2859e-10 kg
- Sulfur dioxide [air, non-urban air or from high stacks]: 1.89748e-9 kg
- Sulfur dioxide [air, urban air close to ground]: 1.93024e-5 kg
- Sulfur oxides [air, unspecified]: 5.49398e-8 kg
- Sulfur trioxide [air, unspecified]: 2.41499e-7 kg
- Sulfuric acid [air, non-urban air or from high stacks]: 1.68161e-10 kg
- Thallium I [air, urban air close to ground]: 2.66435e-13 kg
- Thorium [air, urban air close to ground]: 6.04111e-12 kg
- Thorium-228 [air, urban air close to ground]: 1.47626e-8 kBq
- Thorium-232 [air, urban air close to ground]: 9.17757e-9 kBq
- Tin ion [air, urban air close to ground]: 4.02097e-12 kg
- Titanium ion [air, urban air close to ground]: 5.06657e-10 kg
- Toluene [air, non-urban air or from high stacks]: 1.50584e-11 kg
- Toluene [air, urban air close to ground]: 4.95373e-9 kg
- Uranium [air, urban air close to ground]: 1.00621e-11 kg
- Uranium-238 [air, urban air close to ground]: 2.67327e-8 kBq
- Vanadium V [air, non-urban air or from high stacks]: 2.0118e-11 kg
- Vanadium V [air, urban air close to ground]: 1.07992e-9 kg
- Water [air, non-urban air or from high stacks]: 0.0372442 m3
- Water [air, unspecified]: 0.00382561 m3
- Xylene [air, urban air close to ground]: 6.92218e-9 kg
- Zinc II [air, non-urban air or from high stacks]: 3.16324e-12 kg
- Zinc II [air, urban air close to ground]: 2.32403e-9 kg
- m-Xylene [air, non-urban air or from high stacks]: 2.04887e-11 kg
- m-Xylene [air, urban air close to ground]: 8.56151e-10 kg
- 2,4-D [soil, agricultural]: 1.08016e-6 kg
- Abamectin [soil, agricultural]: 6.88866e-9 kg
- Acetamiprid [soil, agricultural]: 3.72289e-7 kg
- Aldicarb [soil, agricultural]: 3.88489e-8 kg
- Azoxystrobin [soil, agricultural]: 5.9273e-7 kg
- Benomyl [soil, agricultural]: 1.98406e-10 kg
- Buprofezin [soil, agricultural]: 1.27697e-8 kg
- Cadmium II [soil, agricultural]: 1.21437e-7 kg
- Captan [soil, agricultural]: 4.26156e-5 kg
- Carbendazim [soil, agricultural]: 1.85301e-7 kg
- Carbofuran [soil, agricultural]: 1.32662e-7 kg
- Chloride [soil, agricultural]: 1.55502e-10 kg
- Chlorothalonil [soil, agricultural]: 6.02349e-7 kg
- Chlorpyrifos [soil, agricultural]: 8.10546e-8 kg
- Chlorpyrifos methyl [soil, agricultural]: 4.67224e-6 kg
- Chromium III [soil, agricultural]: 6.91756e-7 kg
- Copper ion [soil, agricultural]: 3.4977e-5 kg
- Cypermethrin [soil, agricultural]: 1.10311e-6 kg
- Cyproconazole [soil, agricultural]: 1.00824e-6 kg
- Cyprodinil [soil, agricultural]: 4.90193e-11 kg
- Difenoconazole [soil, agricultural]: 2.98095e-8 kg
- Diflubenzuron [soil, agricultural]: 6.50893e-8 kg
- Diflufenican [soil, agricultural]: 5.30523e-7 kg
- Dimethoate [soil, agricultural]: 7.20513e-6 kg
- Diuron [soil, agricultural]: 3.84649e-7 kg
- Ethephon [soil, agricultural]: 4.3482e-8 kg
- Fenbuconazole [soil, agricultural]: 2.40708e-9 kg
- Fosetyl [soil, agricultural]: 1.71525e-8 kg
- Glufosinate [soil, agricultural]: 3.00745e-8 kg
- Glyphosate [soil, agricultural]: 5.9018e-5 kg
- Hexaconazole [soil, agricultural]: 2.56257e-7 kg
- Imidacloprid [soil, agricultural]: 9.66388e-7 kg
- Indoxacarb [soil, agricultural]: 1.48802e-6 kg
- Iprodione [soil, agricultural]: 1.91992e-5 kg
- Kaolin [soil, agricultural]: 1.38563e-7 kg
- Lead II [soil, agricultural]: 2.71509e-7 kg
- MCPA [soil, agricultural]: 9.70971e-7 kg
- Malathion [soil, agricultural]: 7.57328e-8 kg
- Mancozeb [soil, agricultural]: 1.1841e-5 kg
- Mercury II [soil, agricultural]: 2.20266e-9 kg
- Metalaxyl-M [soil, agricultural]: 3.11289e-5 kg
- Methiocarb [soil, agricultural]: 1.50916e-8 kg
- Methoxyfenozide [soil, agricultural]: 5.6389e-8 kg
- Mineral oil [soil, agricultural]: 6.23037e-5 kg
- Myclobutanil [soil, agricultural]: 2.00411e-7 kg
- Nickel II [soil, agricultural]: 1.4776e-7 kg
- Norflurazon [soil, agricultural]: 1.85852e-7 kg
- Oils, unspecified [soil, industrial]: 2.24552e-7 kg
- Oryzalin [soil, agricultural]: 1.25765e-8 kg
- Oxamyl [soil, agricultural]: 3.00884e-9 kg
- Oxyfluorfen [soil, agricultural]: 3.38277e-6 kg
- Paraquat [soil, agricultural]: 2.02946e-6 kg
- Pendimethalin [soil, agricultural]: 2.47164e-7 kg
- Pesticides, unspecified [soil, agricultural]: 8.74334e-7 kg
- Phosmet [soil, agricultural]: 4.17554e-8 kg
- Pirimiphos methyl [soil, agricultural]: 3.7324e-7 kg
- Pyraclostrobin [soil, agricultural]: 4.31047e-7 kg
- Rimsulfuron [soil, agricultural]: 1.30719e-11 kg
- Simazine [soil, agricultural]: 1.2837e-6 kg
- Spinosad [soil, agricultural]: 8.82841e-9 kg
- Sulfur [soil, agricultural]: 1.18097e-5 kg
- Tebuconazole [soil, agricultural]: 4.7883e-8 kg
- Terbufos [soil, agricultural]: 2.57381e-6 kg
- Thiamethoxam [soil, agricultural]: 1.05704e-6 kg
- Thiophanate-methyl [soil, agricultural]: 1.63718e-7 kg
- Thiram [soil, agricultural]: 3.51996e-10 kg
- Trifloxystrobin [soil, agricultural]: 4.73549e-9 kg
- Zinc II [soil, agricultural]: 2.22642e-6 kg
- 4-Methyl-2-pentanol [water, surface water]: 2.12416e-16 kg
- AOX, Adsorbable Organic Halogen [water, surface water]: 3.26024e-8 kg
- AOX, Adsorbable Organic Halogen [water, unspecified]: 2.5825e-8 kg
- Aluminium III [water, unspecified]: 1.19495e-5 kg
- Ammonium [water, unspecified]: 2.00154e-8 kg
- BOD5, Biological Oxygen Demand [water, ground-]: 0.00274827 kg
- BOD5, Biological Oxygen Demand [water, surface water]: 1.56434e-5 kg
- BOD5, Biological Oxygen Demand [water, unspecified]: 5.32489e-7 kg
- Benzene [water, surface water]: 1.80558e-14 kg
- COD, Chemical Oxygen Demand [water, ground-]: 0.00549654 kg
- COD, Chemical Oxygen Demand [water, surface water]: 8.90155e-5 kg
- COD, Chemical Oxygen Demand [water, unspecified]: 1.34577e-5 kg
- Cadmium II [water, ground-]: 9.09167e-10 kg
- Cadmium II [water, surface water]: 1.68621e-9 kg
- Cadmium II [water, unspecified]: 5.97196e-9 kg
- Chloride [water, unspecified]: 5.45403e-5 kg
- Chromium III [water, ground-]: 5.06954e-7 kg
- Chromium III [water, surface water]: 1.81392e-7 kg
- Chromium III [water, unspecified]: 6.20564e-11 kg
- Copper ion [water, ground-]: 8.99219e-8 kg
- Copper ion [water, surface water]: 2.63199e-7 kg
- Copper ion [water, unspecified]: 1.19648e-7 kg
- DOC, Dissolved Organic Carbon [water, ground-]: 0.00203575 kg
- DOC, Dissolved Organic Carbon [water, surface water]: 3.25134e-5 kg
- DOC, Dissolved Organic Carbon [water, unspecified]: 2.97864e-6 kg
- EDTA, Ethylenediaminetetraacetic Acid [water, unspecified]: 1.10101e-9 kg
- Formaldehyde [water, surface water]: 3.13689e-11 kg
- Formaldehyde [water, unspecified]: 1.03096e-9 kg
- Hydrogen sulfide [water, surface water]: 1.48797e-10 kg
- Iron ion [water, unspecified]: 1.79022e-7 kg
- Lead II [water, ground-]: 4.26989e-9 kg
- Lead II [water, surface water]: 6.46961e-8 kg
- Lead II [water, unspecified]: 1.59185e-7 kg
- Magnesium [water, surface water]: 2.81518e-10 kg
- Manganese II [water, unspecified]: 1.02421e-6 kg
- Mercury II [water, ground-]: 2.18158e-10 kg
- Mercury II [water, surface water]: 4.19508e-10 kg
- Mercury II [water, unspecified]: 2.27586e-12 kg
- Methanol [water, surface water]: 9.15649e-11 kg
- Nickel II [water, ground-]: 5.79892e-11 kg
- Nickel II [water, surface water]: 1.21487e-7 kg
- Nickel II [water, unspecified]: 1.73454e-6 kg
- Nitrate [water, ground-]: 0.00535902 kg
- Nitrate [water, unspecified]: 3.94792e-8 kg
- Nitrogen [water, surface water]: 1.61304e-6 kg
- Nitrogen [water, unspecified]: 2.97913e-7 kg
- Phosphate [water, ground-]: 4.72922e-6 kg
- Phosphate [water, surface water]: 2.26029e-5 kg
- Phosphorus [water, ground-]: 1.49343e-8 kg
- Phosphorus [water, surface water]: 5.99804e-6 kg
- Phosphorus [water, unspecified]: 2.29162e-8 kg
- Sodium I [water, unspecified]: 0.000344517 kg
- Sulfate [water, unspecified]: 0.000899087 kg
- Suspended solids, unspecified [water, surface water]: 1.59182e-5 kg
- Suspended solids, unspecified [water, unspecified]: 2.46712e-6 kg
- TOC, Total Organic Carbon [water, ground-]: 0.00203575 kg
- TOC, Total Organic Carbon [water, surface water]: 3.25134e-5 kg
- TOC, Total Organic Carbon [water, unspecified]: 2.97864e-6 kg
- Tin ion [water, unspecified]: 9.94565e-7 kg
- Toluene [water, surface water]: 9.98354e-15 kg
- Water [water, ground-]: 0.00824977 m3
- Water [water, surface water]: 0.028802 m3
- Water [water, unspecified]: 0.000274753 m3
- Zinc II [water, ground-]: 4.37135e-7 kg
- Zinc II [water, surface water]: 3.00183e-7 kg
- Zinc II [water, unspecified]: 3.596e-7 kg
