# treatment of electric arc furnace secondary metallurgy slag, residual material landfill

Dataset: EcoSpold 2, unit process
Geography: GLO
Time period: 1987-01-01 to 2022-12-31
Technology level: current
Classification: ISIC rev.4 ecoinvent: 3821:Treatment and disposal of non-hazardous waste
Scenario: Business-as-Usual
System model: Allocation at the point of substitution
Generated by: Avraam Symeonidis
Database: ecoinvent
isCopyrightProtected: true

## General comment
Steelmaking produces large quantities of by-products, with around 450-500 kg of by-products produced per tonne of steel. The main components of these are slags (approximately 80%), along with dusts and sludges from air pollution abatement equipment (flue gas scrubbing) and mill scale. The physical or chemical natures of these by-products means that it can be difficult to find possible uses. Hence, most of these by-products have historically been disposed of in landfills. However, new legislation and financial instruments, such as landfill taxes, mean that landfilling is now a costly and undesirable management solution. Instead, considerable efforts have been made to recover by-products for internal reuse or to sell them to other industries to recover value. The fraction of steelmaking by-products that is sent to landfill has drastically reduced. This activity represents the disposal of 'electric arc furnace secondary metallurgy slag' in a residual material landfill. This type of landfill is designed to receive mostly inorganic (low carbon, <5 w-%) wastes in a physically stable form. Further information is provided in ecoinvent report no. 13, Part II: Landfills – Underground Deposits – Landfarming (Doka, 2009).
References
Doka, G. (2009). Life cycle inventories of waste treatment services. Ecoinvent report no. 13. Swiss Centre for Life Cycle Inventories, Dubendorf, Switzerland.
Inventoried waste contains 100% electric arc furnace secondary metallurgy slag; .
waste composition (wet, in ppm): H2O 5000; O 476600; H n.a.; C 827; S 6150; N n.a.; P 300; B n.a.; Cl n.a.; Br n.a.; F 12900; I n.a.; Ag n.a.; As 1.16; Ba 81.6; Cd n.a.; Co n.a.; Cr 889; Cu 110; Hg n.a.; Mn 5570; Mo 70.9; Ni 60.1; Pb 36.2; Sb n.a.; Se n.a.; Sn n.a.; V 373; Zn 101; Be n.a.; Sc n.a.; Sr n.a.; Ti 1820; Tl n.a.; W n.a.; Si 60100; Fe 19900; Ca 313000; Al 53000; K 138; Mg 42800; Na 168;
Share of carbon in waste that is biogenic 100%.
Additional solidification with 0.4 kg of cement. Note that value for oxygen content was calculated by assuming that other elements in the material are present as oxides and that any missing mass (either not reported or not detected) was assumed to be oxygen.

## Included activities start
Activity starts with the reception of the waste.

## Included activities end
Waste-specific short-term emissions to water from leachate. Long-term emissions from landfill to ground water. Expenditures for solidification with cement.

## Technology
Time period based on the range of years of publication from which composition data were taken. Note that the Residual Material Landfill modelling tool was published in 2009.

## Reference product
- electric arc furnace secondary metallurgy slag: -1 kg; name RP; By-product classification Waste; CPC 39310: Slag, dross, scalings and other waste from the manufacture of iron or steel
  production volume 6.90497e9 kg
    Assuming that 76.2% of electric arc furnace secondary metallurgy slag is sent for disposal in landfill (worldsteel, 2010).
    References:
    Worldsteel (2010). Steel industry by-products. World Steel Association: Brussels, Belgium.
  property aluminium content 0.0532663
    The value of 'aluminium content' is documented in Turner & Symeonidis, 2020.
    Reference: Turner David & Symeonidis Avraam, 2020, Life cycle inventories of the treatment of iron and steelmaking by-products, ecoinvent association, Zürich, Switzerland
  property arsenic content 1.16583e-6
    The value of 'arsenic content' is documented in Turner & Symeonidis, 2020.
    Reference: Turner David & Symeonidis Avraam, 2020, Life cycle inventories of the treatment of iron and steelmaking by-products, ecoinvent association, Zürich, Switzerland
  property barium content 8.20101e-5
    The value of 'barium content' is documented in Turner & Symeonidis, 2020.
    Reference: Turner David & Symeonidis Avraam, 2020, Life cycle inventories of the treatment of iron and steelmaking by-products, ecoinvent association, Zürich, Switzerland
  property calcium content 0.314573
    The value of 'calcium content' is documented in Turner & Symeonidis, 2020.
    Reference: Turner David & Symeonidis Avraam, 2020, Life cycle inventories of the treatment of iron and steelmaking by-products, ecoinvent association, Zürich, Switzerland
  property carbon content, fossil 0.000831156
    The value of 'carbon content, fossil' is documented in Turner & Symeonidis, 2020.
    Reference: Turner David & Symeonidis Avraam, 2020, Life cycle inventories of the treatment of iron and steelmaking by-products, ecoinvent association, Zürich, Switzerland
  property carbon content, non-fossil 0
    The value of 'carbon content, non-fossil' is documented in Turner & Symeonidis, 2020.
    Reference: Turner David & Symeonidis Avraam, 2020, Life cycle inventories of the treatment of iron and steelmaking by-products, ecoinvent association, Zürich, Switzerland
  property chromium content 0.000893467
    The value of 'chromium content' is documented in Turner & Symeonidis, 2020.
    Reference: Turner David & Symeonidis Avraam, 2020, Life cycle inventories of the treatment of iron and steelmaking by-products, ecoinvent association, Zürich, Switzerland
  property copper content 0.000110553
    The value of 'copper content' is documented in Turner & Symeonidis, 2020.
    Reference: Turner David & Symeonidis Avraam, 2020, Life cycle inventories of the treatment of iron and steelmaking by-products, ecoinvent association, Zürich, Switzerland
  property fluorine content 0.0129648
    The value of 'fluorine content' is documented in Turner & Symeonidis, 2020.
    Reference: Turner David & Symeonidis Avraam, 2020, Life cycle inventories of the treatment of iron and steelmaking by-products, ecoinvent association, Zürich, Switzerland
  property heating value, net 0 MJ
    Non combustible products are assumed to have an LHV equal to zero (0).
  property iron content 0.02
    The value of 'iron content' is documented in Turner & Symeonidis, 2020.
    Reference: Turner David & Symeonidis Avraam, 2020, Life cycle inventories of the treatment of iron and steelmaking by-products, ecoinvent association, Zürich, Switzerland
  property lead content 3.63819e-5
    The value of 'lead content' is documented in Turner & Symeonidis, 2020.
    Reference: Turner David & Symeonidis Avraam, 2020, Life cycle inventories of the treatment of iron and steelmaking by-products, ecoinvent association, Zürich, Switzerland
  property magnesium content 0.0430151
    The value of 'magnesium content' is documented in Turner & Symeonidis, 2020.
    Reference: Turner David & Symeonidis Avraam, 2020, Life cycle inventories of the treatment of iron and steelmaking by-products, ecoinvent association, Zürich, Switzerland
  property manganese content 0.00559799
    The value of 'manganese content' is documented in Turner & Symeonidis, 2020.
    Reference: Turner David & Symeonidis Avraam, 2020, Life cycle inventories of the treatment of iron and steelmaking by-products, ecoinvent association, Zürich, Switzerland
  property molybdenum content 7.12563e-5
    The value of 'molybdenum content' is documented in Turner & Symeonidis, 2020.
    Reference: Turner David & Symeonidis Avraam, 2020, Life cycle inventories of the treatment of iron and steelmaking by-products, ecoinvent association, Zürich, Switzerland
  property nickel content 6.0402e-5
    The value of 'nickel content' is documented in Turner & Symeonidis, 2020.
    Reference: Turner David & Symeonidis Avraam, 2020, Life cycle inventories of the treatment of iron and steelmaking by-products, ecoinvent association, Zürich, Switzerland
  property oxygen content 0.478999
    The value of 'oxygen content' is documented in Turner & Symeonidis, 2020.
    Reference: Turner David & Symeonidis Avraam, 2020, Life cycle inventories of the treatment of iron and steelmaking by-products, ecoinvent association, Zürich, Switzerland
  property phosphorus content 0.000301508
    The value of 'phosphorus content' is documented in Turner & Symeonidis, 2020.
    Reference: Turner David & Symeonidis Avraam, 2020, Life cycle inventories of the treatment of iron and steelmaking by-products, ecoinvent association, Zürich, Switzerland
  property potassium content 0.000138693
    The value of 'potassium content' is documented in Turner & Symeonidis, 2020.
    Reference: Turner David & Symeonidis Avraam, 2020, Life cycle inventories of the treatment of iron and steelmaking by-products, ecoinvent association, Zürich, Switzerland
  property price 0 EUR2005
    Waste products are assigned a price of zero as they are assumed to require further treatment.
  property silicon content 0.060402
    The value of 'silicon content' is documented in Turner & Symeonidis, 2020.
    Reference: Turner David & Symeonidis Avraam, 2020, Life cycle inventories of the treatment of iron and steelmaking by-products, ecoinvent association, Zürich, Switzerland
  property sodium content 0.000168844
    The value of 'sodium content' is documented in Turner & Symeonidis, 2020.
    Reference: Turner David & Symeonidis Avraam, 2020, Life cycle inventories of the treatment of iron and steelmaking by-products, ecoinvent association, Zürich, Switzerland
  property sulfur content 0.0061809
    The value of 'sulfur content' is documented in Turner & Symeonidis, 2020.
    Reference: Turner David & Symeonidis Avraam, 2020, Life cycle inventories of the treatment of iron and steelmaking by-products, ecoinvent association, Zürich, Switzerland
  property titanium content 0.00182915
    The value of 'titanium content' is documented in Turner & Symeonidis, 2020.
    Reference: Turner David & Symeonidis Avraam, 2020, Life cycle inventories of the treatment of iron and steelmaking by-products, ecoinvent association, Zürich, Switzerland
  property vanadium content 0.000374874
    The value of 'vanadium content' is documented in Turner & Symeonidis, 2020.
    Reference: Turner David & Symeonidis Avraam, 2020, Life cycle inventories of the treatment of iron and steelmaking by-products, ecoinvent association, Zürich, Switzerland
  property zinc content 0.000101508
    The value of 'zinc content' is documented in Turner & Symeonidis, 2020.
    Reference: Turner David & Symeonidis Avraam, 2020, Life cycle inventories of the treatment of iron and steelmaking by-products, ecoinvent association, Zürich, Switzerland
  properties: carbon allocation 0.000827 kg, carbon content 0.000831156, dry mass 0.995 kg, water content 0.00502513, water in wet mass 0.005 kg, wet mass 1 kg

## Inputs from technosphere
- cement, unspecified: 0.4 kg; lognormal variance with pedigree 0.091084, pedigree (1,1,5,5,4)
  Cement for solidification of residual material waste. Uncertainty in mass from solidification recipe.
  properties: dry mass 1 kg, wet mass 1 kg
- process-specific burdens, residual material landfill: 0.280494, 0.71109, 0.00841689 kg (3 suppliers, which the file names only by identifier); sum of these 1 kg; lognormal variance with pedigree 0.082, pedigree (1,1,5,5,4)
  demands per kilogram waste. uncertainty is heeded in the module
- residual material landfill: 2.08333e-9 unit; lognormal variance with pedigree 0.082, pedigree (1,1,5,5,4)
  demands per kilogram waste. uncertainty is heeded in the module
- waste cement, hydrated: -0.00841689, -0.280494, -0.71109 kg (3 suppliers, which the file names only by identifier); sum of these -1 kg; lognormal variance with pedigree 0.059084, pedigree (1,1,4,5,4)
  Hydrated cement for solidification of residual material waste. Uncertainty in mass from solidification recipe.
  production volume
    Calculated based on the production volume of the reference product.
  properties: dry mass 1 kg, wet mass 1 kg

## Emissions to nature
- Aluminium III [water, ground-, long-term]: 0.0157332 kg; lognormal variance with pedigree 0.632427, pedigree (1,1,5,5,4)
  uncertainty is calculated from uncertainties in waste composition and transfer coefficients in incinerator and landfills.
- Aluminium III [water, surface water]: 2.62657e-5 kg; lognormal variance with pedigree 1.00812, pedigree (1,1,5,5,4)
  uncertainty is calculated from uncertainties in waste composition and transfer coefficients in residual landfill
- Arsenic ion [water, ground-, long-term]: 1.16e-15 kg; lognormal variance with pedigree 1.65581, pedigree (1,1,5,5,4)
  (same comment as for Aluminium III)
- Arsenic ion [water, surface water]: 1.16e-6 kg; lognormal variance with pedigree 1.63217, pedigree (1,1,5,5,4)
  (same comment as for Aluminium III)
- BOD5, Biological Oxygen Demand [water, ground-, long-term]: 0.000441791 kg; lognormal variance with pedigree 0.812027, pedigree (1,1,5,5,4)
  (same comment as for Aluminium III)
- BOD5, Biological Oxygen Demand [water, surface water]: 7.37547e-7 kg; lognormal variance with pedigree 1.40744, pedigree (1,1,5,5,4)
  (same comment as for Aluminium III)
- Barium II [water, ground-, long-term]: 6.7404e-7 kg; lognormal variance with pedigree 6.82221, pedigree (1,1,5,5,4)
  (same comment as for Aluminium III)
- Barium II [water, surface water]: 1.12528e-9 kg; lognormal variance with pedigree 2.28865, pedigree (1,1,5,5,4)
  (same comment as for Aluminium III)
- COD, Chemical Oxygen Demand [water, ground-, long-term]: 0.00135064 kg; lognormal variance with pedigree 0.812027, pedigree (1,1,5,5,4)
  (same comment as for Aluminium III)
- COD, Chemical Oxygen Demand [water, surface water]: 2.25482e-6 kg; lognormal variance with pedigree 1.40744, pedigree (1,1,5,5,4)
  (same comment as for Aluminium III)
- Calcium II [water, ground-, long-term]: 0.0282821 kg; lognormal variance with pedigree 1.56314, pedigree (1,1,5,5,4)
  (same comment as for Aluminium III)
- Calcium II [water, surface water]: 4.72155e-5 kg; lognormal variance with pedigree 1.01954, pedigree (1,1,5,5,4)
  (same comment as for Aluminium III)
- Chromium VI [water, ground-, long-term]: 0.00016881 kg; lognormal variance with pedigree 0.761611, pedigree (1,1,5,5,4)
  (same comment as for Aluminium III)
- Chromium VI [water, surface water]: 5.34401e-5 kg; lognormal variance with pedigree 0.922668, pedigree (1,1,5,5,4)
  (same comment as for Aluminium III)
- Copper ion [water, ground-, long-term]: 4.2344e-6 kg; lognormal variance with pedigree 3.68373, pedigree (1,1,5,5,4)
  (same comment as for Aluminium III)
- Copper ion [water, surface water]: 7.06911e-9 kg; lognormal variance with pedigree 2.04544, pedigree (1,1,5,5,4)
  (same comment as for Aluminium III)
- DOC, Dissolved Organic Carbon [water, ground-, long-term]: 0.000534451 kg; lognormal variance with pedigree 0.812027, pedigree (1,1,5,5,4)
  (same comment as for Aluminium III)
- DOC, Dissolved Organic Carbon [water, surface water]: 8.92239e-7 kg; lognormal variance with pedigree 1.40744, pedigree (1,1,5,5,4)
  (same comment as for Aluminium III)
- Fluoride [water, ground-, long-term]: 0.0122009 kg; lognormal variance with pedigree 0.419448, pedigree (1,1,5,5,4)
  (same comment as for Aluminium III)
- Fluoride [water, surface water]: 0.000699074 kg; lognormal variance with pedigree 0.597126, pedigree (1,1,5,5,4)
  (same comment as for Aluminium III)
- Iron ion [water, ground-, long-term]: 9.97382e-5 kg; lognormal variance with pedigree 7.38079, pedigree (1,1,5,5,4)
  (same comment as for Aluminium III)
- Iron ion [water, surface water]: 1.66508e-7 kg; lognormal variance with pedigree 1.65237, pedigree (1,1,5,5,4)
  (same comment as for Aluminium III)
- Lead II [water, ground-, long-term]: 1.87773e-7 kg; lognormal variance with pedigree 8.10032, pedigree (1,1,5,5,4)
  (same comment as for Aluminium III)
- Lead II [water, surface water]: 3.13478e-10 kg; lognormal variance with pedigree 2.45805, pedigree (1,1,5,5,4)
  (same comment as for Aluminium III)
- Magnesium [water, ground-, long-term]: 0.00486306 kg; lognormal variance with pedigree 1.46809, pedigree (1,1,5,5,4)
  (same comment as for Aluminium III)
- Magnesium [water, surface water]: 8.11863e-6 kg; lognormal variance with pedigree 1.15646, pedigree (1,1,5,5,4)
  (same comment as for Aluminium III)
- Manganese II [water, ground-, long-term]: 4.60098e-5 kg; lognormal variance with pedigree 6.27174, pedigree (1,1,5,5,4)
  (same comment as for Aluminium III)
- Manganese II [water, surface water]: 7.68111e-8 kg; lognormal variance with pedigree 1.73818, pedigree (1,1,5,5,4)
  (same comment as for Aluminium III)
- Molybdenum VI [water, ground-, long-term]: 3.25505e-7 kg; lognormal variance with pedigree 1.1133, pedigree (1,1,5,5,4)
  (same comment as for Aluminium III)
- Molybdenum VI [water, surface water]: 7.05745e-5 kg; lognormal variance with pedigree 1.08981, pedigree (1,1,5,5,4)
  (same comment as for Aluminium III)
- Nickel II [water, ground-, long-term]: 2.17585e-5 kg; lognormal variance with pedigree 1.36982, pedigree (1,1,5,5,4)
  (same comment as for Aluminium III)
- Nickel II [water, surface water]: 3.63246e-8 kg; lognormal variance with pedigree 1.83023, pedigree (1,1,5,5,4)
  (same comment as for Aluminium III)
- Phosphate [water, ground-, long-term]: 0.000205504 kg; lognormal variance with pedigree 1.45915, pedigree (1,1,5,5,4)
  (same comment as for Aluminium III)
- Phosphate [water, surface water]: 3.43079e-7 kg; lognormal variance with pedigree 1.6797, pedigree (1,1,5,5,4)
  (same comment as for Aluminium III)
- Potassium I [water, ground-, long-term]: 9.90999e-5 kg; lognormal variance with pedigree 1.00502, pedigree (1,1,5,5,4)
  (same comment as for Aluminium III)
- Potassium I [water, surface water]: 3.89001e-5 kg; lognormal variance with pedigree 1.04332, pedigree (1,1,5,5,4)
  (same comment as for Aluminium III)
- Silicon [water, ground-, long-term]: 0.0599648 kg; lognormal variance with pedigree 0.251182, pedigree (1,1,5,5,4)
  (same comment as for Aluminium III)
- Silicon [water, surface water]: 0.000135162 kg; lognormal variance with pedigree 0.799895, pedigree (1,1,5,5,4)
  (same comment as for Aluminium III)
- Sodium I [water, ground-, long-term]: 0.000104953 kg; lognormal variance with pedigree 0.980946, pedigree (1,1,5,5,4)
  (same comment as for Aluminium III)
- Sodium I [water, surface water]: 6.30468e-5 kg; lognormal variance with pedigree 1.0014, pedigree (1,1,5,5,4)
  (same comment as for Aluminium III)
- Sulfate [water, ground-, long-term]: 0.0164705 kg; lognormal variance with pedigree 0.509235, pedigree (1,1,5,5,4)
  (same comment as for Aluminium III)
- Sulfate [water, surface water]: 0.00197947 kg; lognormal variance with pedigree 0.622494, pedigree (1,1,5,5,4)
  (same comment as for Aluminium III)
- TOC, Total Organic Carbon [water, ground-, long-term]: 0.000534451 kg; lognormal variance with pedigree 0.812027, pedigree (1,1,5,5,4)
  (same comment as for Aluminium III)
- TOC, Total Organic Carbon [water, surface water]: 8.92239e-7 kg; lognormal variance with pedigree 1.40744, pedigree (1,1,5,5,4)
  (same comment as for Aluminium III)
- Titanium ion [water, ground-, long-term]: 0.000540271 kg; lognormal variance with pedigree 1.0307, pedigree (1,1,5,5,4)
  (same comment as for Aluminium III)
- Titanium ion [water, surface water]: 9.01955e-7 kg; lognormal variance with pedigree 1.40639, pedigree (1,1,5,5,4)
  (same comment as for Aluminium III)
- Vanadium V [water, ground-, long-term]: 0.000286693 kg; lognormal variance with pedigree 0.886461, pedigree (1,1,5,5,4)
  (same comment as for Aluminium III)
- Vanadium V [water, surface water]: 9.15416e-7 kg; lognormal variance with pedigree 1.40685, pedigree (1,1,5,5,4)
  (same comment as for Aluminium III)
- Zinc II [water, ground-, long-term]: 1.23786e-6 kg; lognormal variance with pedigree 5.88652, pedigree (1,1,5,5,4)
  (same comment as for Aluminium III)
- Zinc II [water, surface water]: 2.06654e-9 kg; lognormal variance with pedigree 2.20821, pedigree (1,1,5,5,4)
  (same comment as for Aluminium III)

## Sampling procedure
For more details about sampling procedures, refer to: Turner, D. & Symeonidis, A. (2020). Life cycle inventories of the treatment of iron and steelmaking by-products, ecoinvent association, Zürich, Switzerland.
