# treatment of sewage sludge, 97% water, WWT, WW from LCD production, landfarming

Dataset: EcoSpold 2, unit process
Geography: CH
Time period: 2000-01-01 to 2022-12-31
Technology level: current
Classification: ISIC rev.4 ecoinvent: 3821:Treatment and disposal of non-hazardous waste
Scenario: Business-as-Usual
System model: Allocation at the point of substitution
Generated by: Nikolia Stoikou
Database: ecoinvent
isCopyrightProtected: true

## General comment
The process represents the treatment of a waste (sewage sludge) that is exclusively produced from another waste treatment. Recommended use of this dataset: to be used within the specific chain of treatments for 'wastewater from LCD production'. Share of biogenic carbon in the sludge: 0%. "LCD" stands for "Liquid-crystal display".

## Included activities start
The activity starts with the waste being available for landfarming. Collection and transportation of the waste to this process is not included.

## Included activities end
The activity ends with the waste being treated and waste-specific emissions from the landfarming process are released to the environment (air, water and soil). The activity is considering local fate of emissions and the initial specific wastewater composition (generating the sewage sludge). Further, it includes provision of fertiliser functions for N, P, K, if present in the sludge.

## Geography
The site has mean annual temperature (MAT) of 9.5 degC, mean annual precipitation (MAP) of 1483.00559816076 mm/year, mean annual actual evaporation (EAT) of 528.63778611689 mm/year. Climate will influence the local fate emissions based on the elemental composition of the sludge as well as water evaporation to air (= consumptive water use).
References: UN data, 2020. Precipitation, Environment Statistics Database, United Nations Statistics Division Available at: http://data.un.org/Data.aspx?q=precipitation&d=ENV&f=variableID%3a6;
World Bank, 2022. Surface area (sq.km), World Bank Group Available at: https://data.worldbank.org/indicator/AG.SRF.TOTL.K2;
MeteoSwiss, 2022. Data on Swiss temperature mean, Federal Department of Home Affairs FDHA. Federal Office of Meteorology and Climatology. Swiss Climate Available at: https://www.MeteoSwiss.admin.ch/home/climate/swiss-climate-in-detail/Swiss-temperature-mean/Data-on-the-Swiss-temperature-mean.html?query=TEMPERATURE+DATA&topic=/content/MeteoSwiss/tags/topics/klima&pageIndex=0&tab=search_tab;
Doka G.,2021. A model for composition-specific life cycle inventories of regionalised wastewater fates, Zurich, Switzerland. http://www.doka.ch/publications.htm

## Technology
Landfarming is the process of spreading a substrate on agricultural soil. Sewage sludge is generated in the wastewater treatment of wastewater from LCD production. Spreading of liquid sewage sludge (97w% water content) on agricultural fields with mobile vacuum tanker.

## Reference product
- organic nitrogen fertiliser, as N: 1 kg; By-product classification allocatable product; CPC 34659: Fertilizers n.e.c.; lognormal variance with pedigree 0.0029223, pedigree (1,1,1,1,1)
  gross fertilizer function provided from sewage sludge spreading on agricultural fields.
  Uncertainty: Uncertainty calculated from upstream wastewater technosphere fate uncertainty, wastewater composition uncertainty, and treatment model uncertainty
  production volume 2.19132e-5 kg
    Calculated in proportion to wastewater reference product.
  property nitrogen content 1
    Nitrogen content (on a dry matter basis) of organic nitrogen fertiliser, as N is calculated from the molecular formula of the substance (Nitrogen).
  property price 0.473 EUR2005
    Set equal to the price of the corresponding inorganic fertiliser
  properties: carbon allocation 0 kg, carbon content 0, carbon content, fossil 0, carbon content, non-fossil 0, dry mass 1 kg, water content 0, water in wet mass 0 kg, wet mass 1 kg

## Inputs from technosphere
- N-methyl-2-pyrrolidone: 8.79236e-6 kg
- acetic acid, without water, in 98% solution state: 7.30277e-5 kg
- acetone, liquid: 2.77622e-5, 8.97648e-5 kg (2 suppliers, which the file names only by identifier); sum of these 0.000117527 kg
- aluminium sulfate, powder: 0.000989629, 0.000208469 kg (2 suppliers, which the file names only by identifier); sum of these 0.0011981 kg
- ammonia, anhydrous, liquid: 1.6218e-5, 1.69982e-6, 3.58923e-5, 1.65534e-5, 6.24714e-5, 8.35459e-6, 7.59881e-6, 0.000179766, 5.37016e-6 kg (9 suppliers, which the file names only by identifier); sum of these 0.000333924 kg
- argon, crude, liquid: 8.98004e-5 kg
- carbon dioxide, liquid: 3.52537e-7, 7.42102e-8 kg (2 suppliers, which the file names only by identifier); sum of these 4.26748e-7 kg
- chemical, organic: 0.00687814 kg
- chlorine, liquid: 0.00014738, 2.94816e-5 kg (2 suppliers, which the file names only by identifier); sum of these 0.000176862 kg
- cyclohexanol: 1.55056e-7, 7.65756e-8 kg (2 suppliers, which the file names only by identifier); sum of these 2.31632e-7 kg
- dimethyl sulfoxide: 0.000756522 kg
- electricity, medium voltage: 0.820919 kWh
- electronic component factory: 8.31586e-10 unit
- ethanol, without water, in 99.7% solution state, from ethylene: 4.77389e-5, 0.0001063 kg (2 suppliers, which the file names only by identifier); sum of these 0.000154039 kg
- ethylene glycol: 8.79236e-6 kg
- glass fibre: 1.58953e-8 kg
- heat, district or industrial, natural gas: 2.10736 MJ
- heat, district or industrial, other than natural gas: 0.530785 MJ
- hydrochloric acid, without water, in 30% solution state: 8.97774e-5, 0.00040201 kg (2 suppliers, which the file names only by identifier); sum of these 0.000491788 kg
- hydrogen fluoride: 1.22121e-5, 3.58274e-5 kg (2 suppliers, which the file names only by identifier); sum of these 4.80395e-5 kg
- hydrogen peroxide, without water, in 50% solution state: 1.38546e-6, 2.91852e-7 kg (2 suppliers, which the file names only by identifier); sum of these 1.67731e-6 kg
- hydrogen, liquid: 0.000908496, 0.00415749 kg (2 suppliers, which the file names only by identifier); sum of these 0.00506599 kg
- isopropanol: 0.0032893, 0.000692903 kg (2 suppliers, which the file names only by identifier); sum of these 0.0039822 kg
- krypton, gaseous: 2.94389e-7 kg
- lime, hydrated, packed: 0.00157269, 1.33495e-5 kg (2 suppliers, which the file names only by identifier); sum of these 0.00158604 kg
- methyl ethyl ketone: 6.08905e-8, 2.29772e-8 kg (2 suppliers, which the file names only by identifier); sum of these 8.38677e-8 kg
- nitric acid, without water, in 50% solution state: 3.06108e-6, 3.98223e-5, 4.54828e-6, 1.13107e-5, 1.47093e-5, 5.41951e-6, 1.86396e-5, 4.91402e-6, 4.53145e-6, 3.45335e-5 kg (10 suppliers, which the file names only by identifier); sum of these 0.00014149 kg
- nitrogen, liquid: 0.0528232, 0.0144996 kg (2 suppliers, which the file names only by identifier); sum of these 0.0673228 kg
- oxygen, liquid: 1.90397e-5, 6.93894e-5 kg (2 suppliers, which the file names only by identifier); sum of these 8.84291e-5 kg
- phosphoric acid, industrial grade, without water, in 85% solution state: 0.00045069 kg
- polarizer, liquid crystals and colour filters, for liquid crystal display: 0.000909547 kg
- polycarbonate: 1.05246e-5 kg
- printed wiring board mounting facility: 1.81713e-9 unit
- propylene glycol, liquid: 0.000153223, 7.56703e-5 kg (2 suppliers, which the file names only by identifier); sum of these 0.000228893 kg
- refinery sludge: -3.29938e-5, -0.000318077, -1.50969e-6 kg (3 suppliers, which the file names only by identifier); sum of these -0.000352581 kg
- sludge, NaCl electrolysis: -0.000653818 kg
- sodium hydroxide, without water, in 50% solution state: 0.00409633 kg
- sodium phosphate: 0.00165461, 0.000348551 kg (2 suppliers, which the file names only by identifier); sum of these 0.00200317 kg
- spent solvent mixture: -0.0273225, -0.000250119, -0.0106759 kg (3 suppliers, which the file names only by identifier); sum of these -0.0382485 kg
- sulfuric acid: 0.00231067, 0.000302284 kg (2 suppliers, which the file names only by identifier); sum of these 0.00261296 kg
- toluene diisocyanate: 2.81507e-7, 5.19925e-8 kg (2 suppliers, which the file names only by identifier); sum of these 3.33499e-7 kg
- used printed wiring boards: -8.73619e-6 kg
- waste glass: -1.53795e-5, -3.68391e-5, -0.000399696, -3.43704e-6, -0.000759234, -5.21934e-6, -0.0037668, -8.35756e-7 kg (8 suppliers, which the file names only by identifier); sum of these -0.00498744 kg
- waste mineral oil: -1.24834e-6, -0.000132032, -5.04257e-5 kg (3 suppliers, which the file names only by identifier); sum of these -0.000183706 kg
- waste plastic, consumer electronics: -0.00864408, -0.00013059 kg (2 suppliers, which the file names only by identifier); sum of these -0.00877467 kg
- wastewater from liquid crystal display production: -7.88013e-5, -0.0162951 m3 (2 suppliers, which the file names only by identifier); sum of these -0.0163739 m3
- xylene: 1.51745e-5, 2.73958e-6 kg (2 suppliers, which the file names only by identifier); sum of these 1.79141e-5 kg

## Inputs from nature
- Water, unspecified natural origin [natural resource, in water]: 0.0163739 m3

## Emissions to nature
- Acetic acid [air, urban air close to ground]: 1.55182e-5 kg
- Acetone [air, urban air close to ground]: 2.12231e-6 kg
- Ammonia [air, urban air close to ground]: 0.000710867 kg
- Boric acid [air, urban air close to ground]: 1.56321e-8 kg
- Boron trifluoride [air, urban air close to ground]: 0.000104746 kg
- Cyclohexane [air, urban air close to ground]: 5.53393e-7 kg
- Diethylene glycol [air, urban air close to ground]: 1.10565e-6 kg
- Hydrochloric acid [air, urban air close to ground]: 0.000691457 kg
- Hydrogen [air, urban air close to ground]: 1.51756e-6 kg
- Hydrogen fluoride [air, urban air close to ground]: 0.000594491 kg
- NMVOC, non-methane volatile organic compounds [air, urban air close to ground]: 0.00121865 kg
- Nitrogen fluoride [air, urban air close to ground]: 3.05926e-7 kg
- Nitrogen oxides [air, urban air close to ground]: 3.06938e-6 kg
- Phosphine [air, urban air close to ground]: 0.000714284 kg
- Phosphoric acid [air, urban air close to ground]: 5.53393e-7 kg
- Sodium tetrahydridoborate [air, urban air close to ground]: 0.000203104 kg
- Sulfur hexafluoride [air, urban air close to ground]: 1.22351e-6 kg
- Tetramethyl ammonium hydroxide [air, urban air close to ground]: 0.00733695 kg
- Antimony ion [water, surface water]: 1.3008e-9 kg
- Arsenic ion [water, surface water]: 1.3008e-9 kg
- BOD5, Biological Oxygen Demand [water, surface water]: 0.000198538 kg
- Boron [water, surface water]: 5.2259e-8 kg
- COD, Chemical Oxygen Demand [water, surface water]: 3.05799e-5 kg
- Cadmium II [water, surface water]: 1.3008e-9 kg
- Chromium III [water, surface water]: 1.00868e-7 kg
- Chromium VI [water, surface water]: 2.61296e-9 kg
- Copper ion [water, surface water]: 1.04746e-8 kg
- Cyanide [water, surface water]: 4.17621e-8 kg
- DOC, Dissolved Organic Carbon [water, surface water]: 1.13259e-5 kg
- Ethane, 1,1,1-trichloro-, HCFC-140 [water, surface water]: 2.61296e-10 kg
- Fluoride [water, surface water]: 0.000146051 kg
- Hydrocarbons, aromatic [water, surface water]: 6.70908e-6 kg
- Iron ion [water, surface water]: 3.00094e-8 kg
- Lead II [water, surface water]: 7.04031e-8 kg
- Manganese II [water, surface water]: 2.61296e-9 kg
- Mercury II [water, surface water]: 1.10565e-9 kg
- Nickel II [water, surface water]: 2.61296e-9 kg
- Nitrogen [water, surface water]: 0.00090484 kg
- Oils, unspecified [water, surface water]: 2.30489e-6 kg
- Phenol [water, surface water]: 2.61296e-9 kg
- Phosphate [water, surface water]: 2.61296e-9 kg
- Phosphorus [water, surface water]: 4.91788e-5 kg
- Solids, inorganic [water, surface water]: 8.61462e-5 kg
- TOC, Total Organic Carbon [water, surface water]: 1.13259e-5 kg
