# fibre and fabric waste, polyester to generic market for waste polyethylene terephthalate

Dataset: EcoSpold 2, unit process
Geography: GLO
Time period: 2019-01-01 to 2022-12-31
Technology level: current
Classification: ISIC rev.4 ecoinvent: 3821:Treatment and disposal of non-hazardous waste
Scenario: Business-as-Usual
System model: Allocation at the point of substitution
Generated by: Avraam Symeonidis
Database: ecoinvent
isCopyrightProtected: true

## General comment
This is a linking (transfering) activity which links fibre and fabric waste, to the generic market for waste polyethylene terephthalate. Fibre and fabric waste, polyester is a by-product of the synthetic textile industry. As they are a polyester they can be matched and approximated to waste polyethylene terephthalate.

## Included activities start
The activity starts with the reception of fibre and fabric waste, polyester.

## Included activities end
The activity ends with the provision of fibre and fabric waste into the generic market for waste polyethylene terephthalate.

## Reference product
- fibre and fabric waste, polyester: -1 kg; By-product classification Recyclable; CPC 39216: Waste of man-made fibres
  production volume 2.079e9 kg
    Calculated from the production volume of this waste in the database.
  property carbon content, fossil 0.58584
    0.585840437101837 for polyester resin production, unsaturated.
    (C8H6O2, C8H16O4, C5H12O2,C4H2O3)n was used as a representative formula for unsaturated polyester resin. This formula corresponds to the M390B Unsaturated Polyester Resin (National Industrial Chemicals Notification and Assessment Scheme, full public report, 1994).
  properties: carbon allocation 0.58584 kg, carbon content 0.58584, carbon content, non-fossil 0, dry mass 1 kg, heating value, net 18.94 MJ, price 0 EUR2005, water content 0, wet mass 1 kg

## Inputs from technosphere
- waste polyethylene terephthalate: -0.0962547, -0.00123823, -0.003065, -0.111061, -0.000561213, -0.00291051, -0.777489, -0.00742067 kg (8 suppliers, which the file names only by identifier); sum of these -1 kg
  production volume
    Calculated from the production volume of this waste in the database.
  properties: carbon content, fossil 0.554108, dry mass 0.998 kg, heating value, net 22.95 MJ, water content 0.00200401, wet mass 1 kg
  note on heating value, net: Value taken from the general comment of the treatment dataset.
