# treatment of sewage sludge, 75% water, WWT, WW from GGBFS production, sanitary landfill

Dataset: EcoSpold 2, unit process
Geography: RoW
Time period: 1994-01-01 to 2022-12-31
Technology level: current
Classification: ISIC rev.4 ecoinvent: 3821:Treatment and disposal of non-hazardous waste
Scenario: Business-as-Usual
System model: Allocation at the point of substitution
Generated by: Nikolia Stoikou
Database: ecoinvent
isCopyrightProtected: true

## General comment
The process represents the treatment of a waste (sewage sludge) that is exclusively generated from another waste treatment. Sewage sludge is generated in the wastewater treatment of 'wastewater from GGBFS production'. Recommended use of this dataset: to be used within the specific chain of treatments for 'wastewater from GGBFS production'. Share of biogenic carbon in the sludge: 0%. Landfill gas capture and utilisation generates 0.03321 kWh of electricity and 0.0599 MJ of useful heat. 0.002598 kg waste mass remains in the landfill even after the long term period. "GGBFS" stands for "Ground granulated blast furnace slag".

## Included activities start
The activity starts with the waste being available at the gate of the treatment facility. Collection and transportation of the waste to the treatment plant is not included.

## Included activities end
The activity ends with the waste being treated and waste-specific emissions from the landfill are released to the environment (air due to landfil gas and water due to landfil leachate).

## Geography
Landfill site with mean annual temperature (MAT) of 16.743579766537 degC, mean annual precipitation (MAP) of 1250.84108527132 mm/year, and net infiltration of 790.252035689178 mm/year.The leachate percolating through the landfill has an average residence time of 6.33 years.
References: UN data, 2020. Precipitation, Environment Statistics Database, United Nations Statistics Division Available at: http://data.un.org/Data.aspx?q=precipitation&d=ENV&f=variableID%3a6;
World Bank, 2022. Surface area (sq.km), World Bank Group Available at: https://data.worldbank.org/indicator/AG.SRF.TOTL.K2;
Doka G.,2021. A model for composition-specific life cycle inventories of regionalised wastewater fates, Zurich, Switzerland. http://www.doka.ch/publications.htm

## Technology
Sanitary (controlled) landfill for municipal solid waste. Ultimate average landfill height is 20 meters. Operation phase duration is 30 years. The total raw landfill gas mass produced in the landfill from this waste is 0.1325 kg. The total CH4 mass in the raw landfill gas is 0.07305 kg. Percentage of landfill gas directly emitted is 47w%. Percentage of landfill gas captured and flared is 18.02w%. Percentage of landfill gas captured and utilised is 34.98%. Conversion efficiencies are 27.8e% for electricity and 13.5e% for useful heat. Leachate generated during the first 100 years is collected and treated region-specifically before emission. Based on average waste composition and climate data the end of carbonate phase is estimated to be reached 2'863 years after waste deposition.

## Reference product
- heat, district or industrial, other than natural gas: 1 MJ; By-product classification allocatable product; CPC 17300: Steam and hot water; lognormal variance with pedigree 0.14165, pedigree (1,1,1,1,1)
  Net production of heat from landfill gas utilisation.
  Uncertainty: Uncertainty calculated depending on waste input and uncertainty of transfer coefficients in landfill to landfill gas, uncertainty in gas capture and utilisation.
  production volume 2477.94 MJ
    Calculated from the production volume of the reference product in proportion to the respective output amounts.
  property price 0.0106 EUR2005
    Average European district heat price from Ecoheatcool and Euroheat 2005-2006, Ecoheat Work package 1: The European heat market. Final report. 10.6 EUR/GJ i s the price of district heat. http://www.solarthermalworld.org/files/Ecoheatcool%20WP1%20Web.pdf?download
  properties: carbon allocation 0 kg, carbon content 0, carbon content, fossil 0, carbon content, non-fossil 0, dry mass 1 kg, heating value, net 1 MJ, water content 0, water in wet mass 0 kg, wet mass 1 kg

## Inputs from technosphere
- blast furnace: 5.61172e-13 unit
- blast furnace dust: -3.54284e-5, -0.000360242 kg (2 suppliers, which the file names only by identifier); sum of these -0.00039567 kg
- blast furnace gas: -0.0119254 MJ
- blast furnace slag: -0.0119262 kg
- blast furnace sludge: -7.78583e-6, -4.55387e-6, -0.000125472, -4.39645e-5 kg (4 suppliers, which the file names only by identifier); sum of these -0.000181776 kg
- coke: 0.418343 MJ
- diesel: 1.6467e-8 kg
- dolomite: 8.12718e-6 kg
- electricity, medium voltage: 1.20902e-7 kWh
- hard coal: 4.39645e-12, 0.000879974, 0.000399011, 0.000528393, 0.0028239, 0.000407181, 0.000594879, 0.000173158, 9.46824e-5 kg (9 suppliers, which the file names only by identifier); sum of these 0.00590117 kg
- heat, district or industrial, other than natural gas: 0.00015525 MJ
- inert waste, for final disposal: -4.68654e-6, -4.76535e-5 kg (2 suppliers, which the file names only by identifier); sum of these -5.234e-5 kg
- iron ore concentrate: 0.00590117, 0.000835052 kg (2 suppliers, which the file names only by identifier); sum of these 0.00673623 kg
- iron pellet: 0.00108812, 0.0157365 kg (2 suppliers, which the file names only by identifier); sum of these 0.0168246 kg
- iron sinter: 0.00252796, 0.0376095, 0.00369875 kg (3 suppliers, which the file names only by identifier); sum of these 0.0438362 kg
- limestone, unprocessed: 7.33658e-6, 3.52262e-5, 0.000358185 kg (3 suppliers, which the file names only by identifier); sum of these 0.000400748 kg
- natural gas, high pressure: 9.08122e-7, 3.83321e-7, 2.19538e-6, 6.51507e-7, 3.68562e-5, 3.767e-6, 4.11199e-7, 1.21339e-8, 1.4601e-6, 1.53328e-6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 m3 (26 suppliers, which the file names only by identifier); sum of these 0.00012105 m3
- nitrogen, liquid: 8.60056e-5 kg
- oxygen, liquid: 0.000147006 kg
- refractory, fireclay, packed: 7.86823e-5 kg
- sponge iron: 9.61724e-9 kg
- steam, in chemical industry: 0.000398429 kg
- wastewater from pig iron production: -5.98007e-6, -1.05049e-8, -4.17997e-7 m3 (3 suppliers, which the file names only by identifier); sum of these -6.40857e-6 m3

## Inputs from nature
- Water, cooling, unspecified natural origin [natural resource, in water]: 4.15826e-5 m3
- Water, unspecified natural origin [natural resource, in ground]: 2.02874e-6 m3
- Water, unspecified natural origin [natural resource, in water]: 1.5877e-5 m3

## Emissions to nature
- Carbon dioxide, fossil [air, unspecified]: 0.0339602 kg
- Carbon monoxide, fossil [air, unspecified]: 5.6416e-5 kg
- Dioxins, measured as 2,3,7,8-tetrachlorodibenzo-p-dioxin [air, unspecified]: 1.1194e-16 kg
- Hydrogen sulfide [air, unspecified]: 4.52246e-7 kg
- Lead II [air, unspecified]: 2.91041e-9 kg
- Manganese II [air, unspecified]: 3.13428e-9 kg
- Nickel II [air, unspecified]: 6.71613e-10 kg
- Nitrogen oxides [air, unspecified]: 3.35815e-6 kg
- Particulate Matter, < 2.5 um [air, unspecified]: 1.20892e-6 kg
- Particulate Matter, > 10 um [air, unspecified]: 6.71613e-8 kg
- Particulate Matter, > 2.5 um and < 10um [air, unspecified]: 6.71613e-8 kg
- Sulfur dioxide [air, unspecified]: 5.59699e-6 kg
- Water [air, unspecified]: 1.96944e-5 m3
- Water [water, unspecified]: 3.8171e-5 m3
