# treatment of aluminium scrap, new, at refiner

Dataset: EcoSpold 2, unit process
Geography: RER
Time period: 2005-01-01 to 2022-12-31
Technology level: current
Classification: EcoSpold01Categories: metals/extraction
Classification: ISIC rev.4 ecoinvent: 2420:Manufacture of basic precious and other non-ferrous metals
Scenario: Business-as-Usual
System model: Allocation at the point of substitution
Share of production covered: 23 %
Generated by: Pascal Lesage
Published in: European Aluminium Association 2008
Database: ecoinvent
isCopyrightProtected: true

## General comment
This dataset is based on two sources: the European Aluminium Association 2005 LCI data (EAA, 2008); and (2) the ecoinvent v2.2 dataset for the same activity (Althaus, 2009), itself largely based on EAA data from 2000. Priority was given to data contained in EAA (2008); Althaus (2009) was used only in cases where it was found to be more complete that EAA (2008).
While this dataset represents the refining of new scrap, the inputs and outputs reported by EAA (2008) actually refer to refining of all scrap, including post-consumer scrap, scrap from foundries, turnings, skimmings (dross) and aluminium metallics. In the ecoinvent database, the refining of post-consumer scrap and new scrap is represented by two distinct but mostly identical datasets to enable the appropriate modeling of aluminium mass flow through the economy.
The dataset contains the inputs and outputs for rotary (64%) and reverbatory (36%) furnaces, which together make up about 90% of utilized furnaces in Europe. The dataset excludes, for lack of access to data, salt slag and dross recycling. According to EAA, this data gap represents approximately 10-20% of potential impacts, as calculated using the CML 2001 method.

## Included activities start
The activity starts with the reception of new aluminium scrap and includes the refining of said scrap in rotary (64%) and reverbatory (36%) furnaces. It includes alloying (based on weak data on actual alloying metals) and casting to secondary billets.

## Included activities end
The activity ends with cast aluminium billets. Note that the dataset excludes salt slag processing and dross recycling (data gap).

## Technology
Average technology for the aluminium recycled (refined) in Europe

## Reference product
- aluminium, cast alloy: 1 kg; name castAlloyAmount; source European Aluminium Association 2008; By-product classification allocatable product; CPC 41431: Unwrought aluminium; lognormal variance with pedigree 0.0012, pedigree (1,3,1,1,1)
  production volume 2.38237e9 kg
    Calculated from the production volume of aluminium scrap, post-consumer in proportion to the respective output amounts.
  property price 1.3 EUR2005
    Temporary price data. Calculated as 90% of purchasers price based on: Source: London Metal Exchange, Aluminium alloy price for 2005
  properties: carbon allocation 0 kg, carbon content 0, carbon content, fossil 0, carbon content, non-fossil 0, dry mass 1 kg, water content 0, water in wet mass 0 kg, wet mass 1 kg

## Inputs from technosphere
- acrylonitrile-butadiene-styrene copolymer: 1.57087e-5 kg
- activated carbon, granular: 9.75949e-6 kg
- alkyd paint, white, without solvent, in 60% solution state: 6.63931e-8, 3.15176e-7 kg (2 suppliers, which the file names only by identifier); sum of these 3.81569e-7 kg
- aluminium casting facility: 4.78215e-14 unit
- aluminium oxide, non-metallurgical: 0.000195665, 0.00115573 kg (2 suppliers, which the file names only by identifier); sum of these 0.0013514 kg
- aluminium scrap, new: -0.00726972, -0.00726972 kg (2 suppliers, which the file names only by identifier); sum of these -0.0145394 kg
- aluminium, cast alloy: 0.0709896 kg
- aluminium, primary, ingot: 0.000321252, 5.83317e-5 kg (2 suppliers, which the file names only by identifier); sum of these 0.000379583 kg
- aluminium, wrought alloy: 1.3165e-5 kg
- ammonia, anhydrous, liquid: 1.32096e-6, 1.38451e-7, 2.92344e-6, 5.08831e-6, 6.80484e-7, 6.18926e-7, 1.4642e-5, 4.37401e-7 kg (8 suppliers, which the file names only by identifier); sum of these 2.585e-5 kg
- chemical, inorganic: 5.05999e-8 kg
- chromium: 1.47299e-7 kg
- clay: 7.83764e-9, 5.10605e-5 kg (2 suppliers, which the file names only by identifier); sum of these 5.10684e-5 kg
- coating powder: 2.76169e-5, 1.36388e-5 kg (2 suppliers, which the file names only by identifier); sum of these 4.12557e-5 kg
- copper, cathode: 0.00085905 kg
- diesel, burned in diesel-electric generating set, 10MW: 0.000242237 MJ
- electricity, medium voltage: 0.238445, 0.00538498, 0.0152695, 0.0119761, 0.000160365, 0.000818246, 0.00127791, 0.0494076, 0.0036625, 0.00270253 kWh (10 suppliers, which the file names only by identifier); sum of these 0.329105 kWh
- epoxy resin, liquid: 3.40772e-5, 7.17849e-6 kg (2 suppliers, which the file names only by identifier); sum of these 4.12557e-5 kg
- ethoxylated alcohol (AE7): 2.62716e-6, 1.24714e-5 kg (2 suppliers, which the file names only by identifier); sum of these 1.50986e-5 kg
- ethylene: 7.34625e-7, 3.89032e-7, 1.17869e-8 kg (3 suppliers, which the file names only by identifier); sum of these 1.13544e-6 kg
- ethylene glycol: 0.00292117 kg
- fibre, viscose: 6.18976e-5 kg
- flat glass, uncoated: 1.92186e-5, 9.33276e-5 kg (2 suppliers, which the file names only by identifier); sum of these 0.000112546 kg
- fly ash and scrubber sludge: -1.06277e-6, -8.97868e-5, -3.54169e-5 kg (3 suppliers, which the file names only by identifier); sum of these -0.000126266 kg
- glass fibre reinforced plastic, polyester resin, hand lay-up: 1.49957e-6 kg
- hazardous waste, for incineration: -0.00037043, -0.000178139, -4.65643e-6 kg (3 suppliers, which the file names only by identifier); sum of these -0.000553225 kg
- hazardous waste, for underground deposit: -9.33934e-5, -6.01571e-6 kg (2 suppliers, which the file names only by identifier); sum of these -9.94091e-5 kg
- heat, district or industrial, natural gas: 7.97315e-6, 0.145898, 0.247435, 2.15716e-5 MJ (4 suppliers, which the file names only by identifier); sum of these 0.393362 MJ
- heat, district or industrial, other than natural gas: 0.00702263 MJ
- inert waste: -1.39309e-6, -1.19982e-8, -4.91046e-6 kg (3 suppliers, which the file names only by identifier); sum of these -6.31555e-6 kg
- inert waste, for final disposal: -3.74894e-5, -0.0057585 kg (2 suppliers, which the file names only by identifier); sum of these -0.00579599 kg
- injection moulding: 0.00552252 kg
- isopropanol: 0.000315198, 6.63977e-5 kg (2 suppliers, which the file names only by identifier); sum of these 0.000381596 kg
- kaolin: 0.0011984 kg
- lead: 0.0054334 kg
- light emitting diode: 3.75154e-7 kg
- lubricating oil: 0.00234905, 0.000494837 kg (2 suppliers, which the file names only by identifier); sum of these 0.00284389 kg
- magnesium: 2.39294e-6 kg
- methyl ethyl ketone: 7.49447e-7, 2.82806e-7 kg (2 suppliers, which the file names only by identifier); sum of these 1.03225e-6 kg
- nickel, class 1: 8.59265e-8 kg
- nitric acid, without water, in 50% solution state: 1.76248e-6, 2.29285e-5, 2.61877e-6, 6.5124e-6, 8.46918e-6, 3.1204e-6, 1.07322e-5, 2.82935e-6, 2.60908e-6 kg (9 suppliers, which the file names only by identifier); sum of these 6.15824e-5 kg
- nitrogen, liquid: 0.00257888, 0.000707885 kg (2 suppliers, which the file names only by identifier); sum of these 0.00328676 kg
- nylon 6: 7.01034e-6, 3.46211e-6 kg (2 suppliers, which the file names only by identifier); sum of these 1.04725e-5 kg
- palladium: 1.25193e-7 kg
- platinum: 6.67695e-7 kg
- polyethylene terephthalate, granulate, amorphous: 7.60863e-5 kg
- polyethylene, high density, granulate: 0.0064406 kg
- polyethylene, low density, granulate: 5.23623e-5 kg
- polyphenylene sulfide: 0.011476 kg
- polypropylene, granulate: 0.000184773 kg
- polyurethane, flexible foam: 8.15756e-5, 1.67083e-5 kg (2 suppliers, which the file names only by identifier); sum of these 9.82839e-5 kg
- polyvinylchloride, suspension polymerised: 3.51533e-5 kg
- potassium hydroxide: 2.06894e-8 kg
- printed wiring board, mounted mainboard, desktop computer, Pb free: 7.12905e-6 kg
- propane, burned in building machine: 0.000532361 MJ
- propylene glycol, liquid: 7.49396e-6, 3.70095e-6 kg (2 suppliers, which the file names only by identifier); sum of these 1.11949e-5 kg
- reinforcing steel: 0.0198339 kg
- road vehicle factory: 3.24397e-11 unit
- rolling mill: 9.05233e-12 unit
- sawnwood, softwood, raw, dried (u=20%): 1.49839e-8, 3.6675e-8 m3 (2 suppliers, which the file names only by identifier); sum of these 5.16589e-8 m3
- scrap steel: -3.86e-10, -9.46165e-7, -3.04665e-7 kg (3 suppliers, which the file names only by identifier); sum of these -1.25122e-6 kg
- section bar rolling, steel: 1.24597e-5 kg
- sheet rolling, aluminium: 1.52368e-5 kg
- sheet rolling, steel: 0.00196161 kg
- silica sand: 0.00155625 kg
- silicon carbide: 3.92659e-5 kg
- soap: 3.43934e-6 kg
- sodium hydroxide, without water, in 50% solution state: 7.24167e-5 kg
- sodium nitrite: 3.00024e-7, 1.47773e-7 kg (2 suppliers, which the file names only by identifier); sum of these 4.47796e-7 kg
- sodium sulfate, anhydrite: 1.60194e-7, 2.61654e-8 kg (2 suppliers, which the file names only by identifier); sum of these 1.86359e-7 kg
- spent solvent mixture: -0.000647391, -5.92642e-6, -0.000252958 kg (3 suppliers, which the file names only by identifier); sum of these -0.000906276 kg
- steel, chromium steel 18/8, hot rolled: 7.26299e-5 kg
- steel, low-alloyed: 6.86926e-9 kg
- steel, low-alloyed, hot rolled: 0.045622 kg
- steel, unalloyed: 0.000365544 kg
- sulfuric acid: 0.000373698, 4.88875e-5 kg (2 suppliers, which the file names only by identifier); sum of these 0.000422585 kg
- synthetic rubber: 0.00141353 kg
- tap water: 0.358953, 0.0287466, 0.00114001, 0.245644, 0.0021272, 0.328961, 0.000747835, 0.00573053 kg (8 suppliers, which the file names only by identifier); sum of these 0.97205 kg
- tempering, flat glass: 0.000112546 kg
- tetraethyl orthosilicate: 0.000991986 kg
- titanium dioxide: 1.08038e-5, 2.16076e-5 kg (2 suppliers, which the file names only by identifier); sum of these 3.24114e-5 kg
- used glider, electric scooter: -7.33787e-5 kg
- used glider, passenger car: -0.00281225 kg
- used internal combustion engine, passenger car: -0.11476 kg
- waste emulsion paint, separated: -6.25608e-7 kg
- waste mineral oil: -6.66311e-6, -0.000704732, -0.000269151 kg (3 suppliers, which the file names only by identifier); sum of these -0.000980546 kg
- waste paint on metal: -3.81511e-6, -3.23839e-8 kg (2 suppliers, which the file names only by identifier); sum of these -3.84749e-6 kg
- waste plastic, industrial electronics: -2.17639e-7, -1.44061e-5 kg (2 suppliers, which the file names only by identifier); sum of these -1.46237e-5 kg
- waste plastic, mixture: -0.000180753, -9.13379e-7, -2.01522e-6, -0.000156655, -0.00126537, -1.20772e-5, -4.73687e-6, -4.98831e-6 kg (8 suppliers, which the file names only by identifier); sum of these -0.00162751 kg
- waste x-ray film: -7.08501e-5 kg
- wastewater, average: -2.65322e-6, -0.000441507, -0.000105573 m3 (3 suppliers, which the file names only by identifier); sum of these -0.000549734 m3
- water, deionised: 8.57998e-8, 2.38349e-5, 7.73757e-5 kg (3 suppliers, which the file names only by identifier); sum of these 0.000101296 kg
- wax, lost-wax casting: 0.000538953 kg
- wire drawing, copper: 0.000847084 kg
- zinc: 5.14796e-6 kg
- zircon: 0.000334782 kg

## Emissions to nature
- NMVOC, non-methane volatile organic compounds [air, unspecified]: 0.000535088 kg
- Nitrogen [air, unspecified]: 0.00328676 kg
- Propanol [air, urban air close to ground]: 0.000240859 kg
- Water [air, unspecified]: 5.3843e-5 m3
- Water [air, urban air close to ground]: 6.33636e-5 m3
- BOD5, Biological Oxygen Demand [water, surface water]: 1.5958e-9 kg
- BOD5, Biological Oxygen Demand [water, unspecified]: 2.89679e-6 kg
- COD, Chemical Oxygen Demand [water, surface water]: 1.18452e-8 kg
- COD, Chemical Oxygen Demand [water, unspecified]: 2.15032e-5 kg
- DOC, Dissolved Organic Carbon [water, surface water]: 4.3871e-9 kg
- DOC, Dissolved Organic Carbon [water, unspecified]: 7.9641e-6 kg
- Phosphate [water, surface water]: 6.13758e-11 kg
- Phosphate [water, unspecified]: 1.11415e-7 kg
- TOC, Total Organic Carbon [water, surface water]: 4.3871e-9 kg
- TOC, Total Organic Carbon [water, unspecified]: 7.9641e-6 kg
- Water [water, unspecified]: 0.00030511 m3

## Sampling procedure
Literature / Survey

## Extrapolations
Representativeness of 23% directly cited in EAA (2008). No extrapolation (EAA data assumed representative of all European refiners).

## Review by Christian Bauer 2012-06-01
passed

## Review by Hans-Jörg Althaus 2012-06-01
ok
