# treatment of digester sludge, municipal incineration with fly ash extraction

Dataset: EcoSpold 2, unit process
Geography: CH
Time period: 2006-01-01 to 2022-12-31
Technology level: current
Classification: ISIC rev.4 ecoinvent: 3821:Treatment and disposal of non-hazardous waste
Synonyms: Kehrichtverbrennung; Siedlungsabfallverbrennung; municipal waste incineration
Scenario: Business-as-Usual
System model: Allocation at the point of substitution
Share of production covered: 100 %
Generated by: Gabor Doka
Published in: Doka G. 2015
Database: ecoinvent
isCopyrightProtected: true

## General comment
This dataset represents the activity of waste disposal of digester sludge in a municipal solid waste incinerator (MSWI) // Recommended use of this dataset: for incineration of fermented (digested) sewage sludge from treatment of average municipal wastewater // // Waste composition (wet, in ppm): upper heating value 4.256 MJ/kg; lower heating value 2.42 MJ/kg; H2O 730020; O 51114; H 11617; C 92935; S 6170.5; N 5783.4; P 8623.3; B n.a.; Cl n.a.; Br n.a.; F n.a.; I n.a.; Ag n.a.; As 0.77875; Ba n.a.; Cd 0.55416; Co 3.1946; Cr 24.155; Cu 111.19; Hg 0.55416; Mn 104.66; Mo 1.8907; Ni 10.399; Pb 30.805; Sb n.a.; Se n.a.; Sn 7.9298; V n.a.; Zn 302.93; Be n.a.; Sc n.a.; Sr n.a.; Ti n.a.; Tl n.a.; W n.a.; Si 11783; Fe 53210; Ca 19995; Al 5906.7; K n.a.; Mg 2244.8; Na n.a.; // Share of carbon in waste that is biogenic 100%. // Share of metals in waste not oxidised and bulk-recyclable (exclude very small or thin parts) Iron: 0%; Alu: 0%; Copper: 0%. // Recovery of metal scrap from bottom ash to recycling: 0g iron scrap, 0g aluminium scrap, 0g copper scrap. From this waste, the FLUWA process in the technology mix recovers 0.00172kg (DM) of a hydroxide sludge to be recycled in zinc furnaces. // Ultimately one kg of this waste produces 0.1936 kg of bottom ash (can include some washed ash) and 0.01277 kg of residues, which are landfilled (technology mix). Additional solidification of residues with 0.005106 kg of cement.Net energy production: 0.16MJ/kg electric energy and 0.52MJ/kg thermal energy. //

## Included activities start
waste incineration from waste reception gate and delivery into waste bunker at incinerator plant site (without transports to the incinerator)

## Included activities end
Waste-specific short-term emissions to water from leachate. Long-term emissions from landfill to ground water.

## Geography
Specific to the technology mix encountered in Switzerland in 2012.

## Technology
average Swiss MSWI plants in 2010 (grate incinerators) with electrostatic precipitator for fly ash (ESP), wet flue gas scrubber and 25% SNCR , 42.77% SCR-high dust , 32.68% SCR-low dust -DeNOx facilities and 0% without Denox (weighted according to mass of burnt waste, representing Swiss average). Efficiency of iron scrap separation from slag : 58%. Efficiency of non-ferrous scrap separation from slag : 31%. The technology mix for this dataset includes a filter ash treatment (FLUWA) of a share of 46.22%. Gross electric efficiency technology mix 15.84% and Gross thermal efficiency technology mix 28.51%

## Time period
Waste composition as given in literature reference, theoretical data or other source. Transfer coefficients for modern MSWI.

## Reference product
- heat, for reuse in municipal waste incineration only: 1 MJ; name E_th_prod_MSWI; By-product classification allocatable product; CPC 17300: Steam and hot water; lognormal variance with pedigree 0.00017155, pedigree (1,1,1,1,1)
  Net useful heat generated from this waste and used in internal MSWI plant energy redistribution.
  Uncertainty: uncertainty is calculated from uncertainties in waste composition and uncertainties in energy efficiency and the uncertainty in internal energy demand
  production volume 5.899e7 MJ
    calculated in proportion to reference product waste input to incinerator
  property exergy 0.1842 MJ; name E_th_prod_MSWI_exergy
    This exergy property is based on the exergy content of the product.
  property price 0.0106 EUR2005
    Average European district heat price from Ecoheatcool and Euroheat 2005-2006, Ecoheat Work package 1: The European heat market. Final report. 10.6 EUR/GJ i s the price of district heat. http://www.solarthermalworld.org/files/Ecoheatcool%20WP1%20Web.pdf?download
  property true value relation 0.1842; name E_th_prod_MSWI_true_value_relation
    property to calculate "true value" from
  properties: carbon allocation 0 kg, carbon content 0

## Inputs from technosphere
- EUR-flat pallet: 3.71929e-7, 1.69059e-7 unit (2 suppliers, which the file names only by identifier); sum of these 5.40988e-7 unit
- [thio]carbamate-compound: 6.93318e-9 kg
- activated bentonite: 4.88707e-8 kg
- alkylbenzene sulfonate, linear, petrochemical: 3.91399e-11 kg
- aluminium sulfate, powder: 4.70764e-9, 1.79418e-9 kg (2 suppliers, which the file names only by identifier); sum of these 6.50182e-9 kg
- ammonium nitrate: 3.97283e-7, 5.72837e-7, 3.33695e-7, 4.00034e-6 kg (4 suppliers, which the file names only by identifier); sum of these 5.30415e-6 kg
- ammonium sulfate: 1.04462e-8, 9.22058e-8 kg (2 suppliers, which the file names only by identifier); sum of these 1.02652e-7 kg
- anaerobic digestion plant, agriculture, with methane recovery: 4.08235e-9, 3.2939e-11 unit (2 suppliers, which the file names only by identifier); sum of these 4.11529e-9 unit
- application of plant protection product, by field sprayer: 1.31689e-8, 3.76752e-9 ha (2 suppliers, which the file names only by identifier); sum of these 1.69365e-8 ha
- benzimidazole-compound: 2.7538e-10 kg
- biowaste: -0.000348477, -2.37301e-6 kg (2 suppliers, which the file names only by identifier); sum of these -0.00035085 kg
- bipyridylium-compound: 1.453e-8 kg
- boric acid, anhydrous, powder: 7.22989e-8 kg
- building, hall: 2.55332e-8 m2
- calcium chloride: 1.11014e-11, 3.8448e-11 kg (2 suppliers, which the file names only by identifier); sum of these 4.95494e-11 kg
- chemical, inorganic: 3.87516e-8 kg
- chemical, organic: 2.21017e-8 kg
- chlorine dioxide: 2.64827e-8, 5.57868e-9 kg (2 suppliers, which the file names only by identifier); sum of these 3.20614e-8 kg
- cocoons: 2.68056e-7 kg
- compost: 4.21399e-5 kg
- conveyor belt: 1.29068e-10 m
- copper oxide: 4.48794e-8 kg
- cottonseed: 4.22732e-5, 0.000192434, 2.98658e-7 kg (3 suppliers, which the file names only by identifier); sum of these 0.000235006 kg
- cyclic N-compound: 2.89952e-8 kg
- diesel, burned in agricultural machinery: 5.66255e-5 MJ
- diesel, burned in building machine: 4.67597e-7 MJ
- digester sludge: -0.520635 kg
- electricity, low voltage: 5.16398e-9, 4.46283e-8, 1.40202e-9, 5.03977e-9, 4.66511e-9, 2.07678e-10, 1.44968e-9, 4.0213e-8, 6.28154e-9, 2.13123e-8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 kWh (103 suppliers, which the file names only by identifier); sum of these 0.00235099 kWh
- electricity, medium voltage: 9.22388e-9, 1.24546e-8, 1.7912e-8, 3.73901e-9, 2.19006e-7, 8.84341e-8, 2.21902e-6, 1.18281e-8, 1.99152e-11, 4.42923e-9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 kWh (77 suppliers, which the file names only by identifier); sum of these 1.34032e-5 kWh
- enzymes: 1.61348e-9 kg
- establishing orchard: 6.89851e-6 unit
- ethanol, without water, in 99.7% solution state, from ethylene: 2.51634e-12, 5.60311e-12 kg (2 suppliers, which the file names only by identifier); sum of these 8.11945e-12 kg
- fertilising, by broadcaster: 2.51168e-9, 9.26885e-9 ha (2 suppliers, which the file names only by identifier); sum of these 1.17805e-8 ha
- fodder loading, by self-loading trailer: 9.3124e-10 m3
- fruit tree seedling, for planting: 6.89851e-6 unit
- furnace, wood chips, with silo, 1000kW: 2.87541e-13 unit
- glyphosate: 9.91523e-9 kg
- green manure, organic, until February: 4.58968e-10 ha
- gypsum, mineral: 1.71301e-6, 8.03247e-9, 3.60524e-9 kg (3 suppliers, which the file names only by identifier); sum of these 1.72465e-6 kg
- harvesting, by complete harvester, beets: 4.58968e-10 ha
- hazardous waste, for incineration: -1.40423e-9, -5.21549e-10, -1.3633e-11 kg (3 suppliers, which the file names only by identifier); sum of these -1.93941e-9 kg
- heat, central or small-scale, other than natural gas: 0.0488907, 9.64211e-5, 0.000399644, 0.000671089, 1.0481e-5 MJ (5 suppliers, which the file names only by identifier); sum of these 0.0500684 MJ
- heat, district or industrial, natural gas: 1.21067e-5, 2.65544e-6, 2.13425e-10, 8.13409e-11 MJ (4 suppliers, which the file names only by identifier); sum of these 1.47625e-5 MJ
- heat, district or industrial, other than natural gas: 1.39954e-6, 2.12062e-7, 1.05772e-5, 2.7753e-5, 4.31896e-6 MJ (5 suppliers, which the file names only by identifier); sum of these 4.42608e-5 MJ
- hexane: 2.28928e-8 kg
- hoeing: 9.17933e-10 ha
- industrial machine, heavy, unspecified: 9.0587e-12, 4.47371e-12 kg (2 suppliers, which the file names only by identifier); sum of these 1.35324e-11 kg
- inorganic nitrogen fertiliser, as N: 6.04912e-7, 1.03676e-12, 4.56017e-7, 2.87826e-13, 2.03184e-7, 1.83905e-9, 8.9373e-12, 4.77263e-12, 6.30281e-13, 2.01097e-11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 kg (62 suppliers, which the file names only by identifier); sum of these 3.2483e-6 kg
- inorganic phosphorus fertiliser, as P2O5: 1.44012e-6, 6.68326e-12, 2.8021e-12, 2.38592e-10, 8.17305e-9, 3.04576e-12, 2.68027e-13, 3.13278e-13, 7.20539e-13, 2.49308e-8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 kg (62 suppliers, which the file names only by identifier); sum of these 5.20302e-6 kg
- inorganic potassium fertiliser, as K2O: 1.09019e-8, 1.02437e-10, 2.90976e-7, 2.6294e-9, 5.45788e-8, 1.29939e-9, 2.95619e-10, 2.0042e-10, 7.57142e-10, 2.62216e-10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 kg (29 suppliers, which the file names only by identifier); sum of these 7.89544e-7 kg
- irrigation: 5.97038e-7, 4.02384e-8, 2.41384e-8, 6.05356e-10, 1.07887e-7, 1.48299e-7, 3.1872e-6, 2.55116e-7, 2.35377e-8, 1.41451e-6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 m3 (16 suppliers, which the file names only by identifier); sum of these 2.11738e-5 m3
- land use change, perennial crop: 3.79145e-10, 2.39784e-9, 3.3437e-9, 7.07435e-10 ha (4 suppliers, which the file names only by identifier); sum of these 6.82813e-9 ha
- lime: 9.83972e-7, 1.9732e-5 kg (2 suppliers, which the file names only by identifier); sum of these 2.0716e-5 kg
- liquefied petroleum gas: 8.581e-9, 6.88061e-11, 4.36412e-11, 3.49764e-9, 1.0254e-10, 3.09135e-10, 1.4638e-8 kg (7 suppliers, which the file names only by identifier); sum of these 2.72407e-8 kg
- liquid manure spreading, by vacuum tanker: 6.02898e-9 m3
- lubricating oil: 2.46667e-9, 9.40102e-10 kg (2 suppliers, which the file names only by identifier); sum of these 3.40678e-9 kg
- mandarin: 0.00105714 kg
- manganese(III) oxide: 3.10956e-8 kg
- mango: 1.093e-5 kg
- manure, liquid, cattle: 0.294286 kg
- manure, liquid, swine: 0.176572 kg
- manure, solid, cattle: 0.0642167 kg
- mulberry leaves: 0.000135044 kg
- nickel, class 1: 5.71538e-10 kg
- nitrile-compound: 8.46564e-9 kg
- oil mill: 4.7476e-14 unit
- organophosphorus-compound, unspecified: 1.9932e-8 kg
- packaging, for fertilisers: 9.67137e-5 kg
- packaging, for pesticides: 6.66175e-7 kg
- paper, newsprint: 8.52469e-8, 2.57059e-7 kg (2 suppliers, which the file names only by identifier); sum of these 3.42306e-7 kg
- paraffin: 1.03428e-7 kg
- pesticide, unspecified: 1.43483e-10 kg
- petrol, unleaded, burned in machinery: 2.73553e-6 MJ
- phenolic resin: 3.68668e-8, 9.67323e-8 kg (2 suppliers, which the file names only by identifier); sum of these 1.33599e-7 kg
- phosphate rock, beneficiated: 7.20461e-9, 2.71096e-6, 2.11591e-8, 2.11217e-8 kg (4 suppliers, which the file names only by identifier); sum of these 2.76045e-6 kg
- phosphoric acid, industrial grade, without water, in 85% solution state: 4.39015e-8 kg
- planting tree: 6.89851e-6 unit
- polyethylene terephthalate, granulate, amorphous: 6.82728e-8 kg
- portafer: 1.15117e-8 kg
- potassium chloride: 6.54154e-6, 2.26196e-7 kg (2 suppliers, which the file names only by identifier); sum of these 6.76773e-6 kg
- potassium sulfate: 5.57486e-7, 2.65146e-6 kg (2 suppliers, which the file names only by identifier); sum of these 3.20895e-6 kg
- poultry manure, dried: 3.537e-6 kg
- pulpwood, hardwood, measured as solid wood under bark: 1.25264e-9, 3.48011e-11, 3.37802e-9 m3 (3 suppliers, which the file names only by identifier); sum of these 4.66546e-9 m3
- pulpwood, softwood, measured as solid wood under bark: 4.49008e-9, 1.19252e-8, 5.48648e-11 m3 (3 suppliers, which the file names only by identifier); sum of these 1.64701e-8 m3
- rape oil, crude: 4.64773e-12, 2.85811e-9 kg (2 suppliers, which the file names only by identifier); sum of these 2.86276e-9 kg
- sawdust, wet, measured as dry mass: 3.18885e-9, 6.93106e-10, 1.56339e-7, 6.01063e-8 kg (4 suppliers, which the file names only by identifier); sum of these 2.20327e-7 kg
- sodium chloride, powder: 7.6302e-11 kg
- sodium hydroxide, without water, in 50% solution state: 1.00199e-10 kg
- sodium metasilicate pentahydrate, 58% active substance, powder: 3.96938e-11, 8.03749e-11 kg (2 suppliers, which the file names only by identifier); sum of these 1.20069e-10 kg
- sodium percarbonate, powder: 4.61136e-11, 9.33743e-11 kg (2 suppliers, which the file names only by identifier); sum of these 1.39488e-10 kg
- solid manure loading and spreading, by hydraulic loader and spreader: 1.64659e-5 kg
- sowing: 4.58968e-10 ha
- sugar beet seed, for sowing: 9.6383e-10 kg
- sulfite: 1.56172e-8, 3.16228e-8 kg (2 suppliers, which the file names only by identifier); sum of these 4.724e-8 kg
- tap water: 2.5409e-8, 8.04702e-7, 4.19925e-8, 6.14447e-6, 7.8356e-8, 1.21174e-5, 2.75466e-8, 2.11021e-7 kg (8 suppliers, which the file names only by identifier); sum of these 1.94509e-5 kg
- thermoforming of plastic sheets: 6.82728e-8 kg
- tillage, harrowing, by spring tine harrow: 9.17933e-10 ha
- tillage, ploughing: 4.58968e-10 ha
- transport, tractor and trailer, agricultural: 6.9268e-8, 6.22912e-11 metric ton*km (2 suppliers, which the file names only by identifier); sum of these 6.93303e-8 metric ton*km
- trellis system, wooden poles, soft wood, tar impregnated: 4.32038e-8 ha
- triazine-compound, unspecified: 9.27113e-10 kg
- urea: 6.68587e-7, 1.19139e-5, 5.39327e-7, 3.64896e-6 kg (4 suppliers, which the file names only by identifier); sum of these 1.67708e-5 kg
- vegetable oil, refined: 4.73163e-8 kg
- waste wood, untreated: -1.40866e-8, -1.2925e-7, -6.40633e-6, -3.18032e-5, -8.17565e-8, -2.44894e-6, -1.00811e-6, -1.30133e-6 kg (8 suppliers, which the file names only by identifier); sum of these -4.3193e-5 kg
- wastewater from hard fibreboard production: -6.85107e-9, -1.79761e-8 m3 (2 suppliers, which the file names only by identifier); sum of these -2.48272e-8 m3
- wastewater from textile production: -4.2889e-9 m3
- wastewater from vegetable oil refinery: -5.62715e-11 m3
- wood ash mixture, pure: -1.53519e-10, -7.46815e-9, -1.9998e-8 kg (3 suppliers, which the file names only by identifier); sum of these -2.76197e-8 kg
- wood chips, dry, measured as dry mass: 6.32572e-7, 1.65976e-6 kg (2 suppliers, which the file names only by identifier); sum of these 2.29234e-6 kg
- wood chips, from post-consumer wood, measured as dry mass: 3.39369e-7, 1.29341e-7 kg (2 suppliers, which the file names only by identifier); sum of these 4.6871e-7 kg
- wooden board factory, organic bonded boards: 3.07087e-16, 1.17037e-16 unit (2 suppliers, which the file names only by identifier); sum of these 4.24124e-16 unit
- zinc monosulfate: 2.97464e-8, 5.63093e-9 kg (2 suppliers, which the file names only by identifier); sum of these 3.53773e-8 kg

## Inputs from nature
- Carbon dioxide, in air [natural resource, in air]: 0.000218794 kg
- Energy, gross calorific value, in biomass [natural resource, biotic]: 0.00113421 MJ
- Occupation, annual crop, non-irrigated, intensive [natural resource, land]: 2.7035e-6 m2*year
- Occupation, industrial area [natural resource, land]: 2.31838e-11 m2*year
- Occupation, permanent crop, irrigated [natural resource, land]: 0.000433205 m2*year
- Transformation, from annual crop, non-irrigated, intensive [natural resource, land]: 4.58967e-6 m2
- Transformation, from permanent crop, irrigated [natural resource, land]: 2.16019e-5 m2
- Transformation, to annual crop, non-irrigated, intensive [natural resource, land]: 4.58967e-6 m2
- Transformation, to permanent crop, irrigated [natural resource, land]: 2.16019e-5 m2
- Water, cooling, unspecified natural origin [natural resource, in water]: 2.50498e-8 m3
- Water, unspecified natural origin [natural resource, in ground]: 5.63444e-7 m3
- Water, unspecified natural origin [natural resource, in water]: 1.44528e-7 m3
- Water, well, in ground [natural resource, in water]: 1.87675e-8 m3

## Emissions to nature
- Acetaldehyde [air, unspecified]: 9.51516e-12 kg
- Ammonia [air, non-urban air or from high stacks]: 2.76911e-5 kg
- Ammonia [air, unspecified]: 9.5564e-11 kg
- Arsenic ion [air, unspecified]: 5.52393e-14 kg
- Benzene [air, unspecified]: 5.02678e-11 kg
- Benzene, ethyl- [air, unspecified]: 1.65718e-12 kg
- Benzene, hexachloro- [air, unspecified]: 3.97723e-19 kg
- Benzo(a)pyrene [air, unspecified]: 2.76197e-14 kg
- Bromine [air, unspecified]: 3.31436e-12 kg
- Cadmium II [air, unspecified]: 3.86675e-14 kg
- Calcium [air, unspecified]: 3.2315e-10 kg
- Carbon dioxide, fossil [air, low population density, long-term]: 8.2163e-8 kg
- Carbon dioxide, fossil [air, non-urban air or from high stacks]: 2.15566e-5 kg
- Carbon dioxide, from soil or biomass stock [air, non-urban air or from high stacks]: 2.47258e-5 kg
- Carbon dioxide, non-fossil [air, non-urban air or from high stacks]: 0.00102012 kg
- Carbon dioxide, non-fossil [air, unspecified]: 5.91061e-6 kg
- Carbon dioxide, non-fossil [air, urban air close to ground]: 0.000112726 kg
- Carbon monoxide, non-fossil [air, unspecified]: 1.65718e-8 kg
- Chlorine [air, unspecified]: 9.94308e-12 kg
- Chromium III [air, unspecified]: 2.18748e-13 kg
- Chromium VI [air, unspecified]: 2.20957e-15 kg
- Copper ion [air, unspecified]: 1.21527e-12 kg
- Dinitrogen monoxide [air, low population density, long-term]: 5.20843e-12 kg
- Dinitrogen monoxide [air, non-urban air or from high stacks]: 3.88417e-6 kg
- Dinitrogen monoxide [air, unspecified]: 1.2705e-10 kg
- Dioxins, measured as 2,3,7,8-tetrachlorodibenzo-p-dioxin [air, unspecified]: 1.71242e-18 kg
- Fluorine [air, unspecified]: 2.76197e-12 kg
- Formaldehyde [air, unspecified]: 3.51199e-10 kg
- Hexane [air, urban air close to ground]: 2.28928e-8 kg
- Hydrocarbons, aliphatic, alkanes, unspecified [air, unspecified]: 5.02678e-11 kg
- Hydrocarbons, aliphatic, unsaturated [air, unspecified]: 1.71242e-10 kg
- Hydrogen sulfide [air, non-urban air or from high stacks]: 5.93923e-7 kg
- Lead II [air, unspecified]: 1.38098e-12 kg
- Magnesium [air, unspecified]: 1.98862e-11 kg
- Manganese II [air, unspecified]: 9.39068e-12 kg
- Mercury II [air, unspecified]: 1.65718e-14 kg
- Methane, fossil [air, low population density, long-term]: 1.1719e-12 kg
- Methane, non-fossil [air, non-urban air or from high stacks]: 0.000285397 kg
- Methane, non-fossil [air, unspecified]: 1.65718e-10 kg
- Methanol [air, unspecified]: 3.21751e-10 kg
- NMVOC, non-methane volatile organic compounds [air, unspecified]: 8.98876e-9 kg
- Nickel II [air, unspecified]: 3.31436e-13 kg
- Nitrogen oxides [air, non-urban air or from high stacks]: 5.14877e-7 kg
- Nitrogen oxides [air, unspecified]: 1.24288e-8 kg
- PAH, polycyclic aromatic hydrocarbons [air, unspecified]: 6.13156e-13 kg
- Particulate Matter, < 2.5 um [air, unspecified]: 2.48577e-9 kg
- Particulate Matter, > 10 um [air, unspecified]: 1.83699e-9 kg
- Particulate Matter, > 2.5 um and < 10um [air, unspecified]: 1.38098e-10 kg
- Phenol, pentachloro- [air, unspecified]: 4.47439e-16 kg
- Phosphorus [air, unspecified]: 1.65718e-11 kg
- Potassium I [air, unspecified]: 1.2926e-9 kg
- Sodium [air, unspecified]: 7.18111e-11 kg
- Sulfur dioxide [air, unspecified]: 1.38098e-10 kg
- Toluene [air, unspecified]: 1.65718e-11 kg
- Water [air, non-urban air or from high stacks]: 1.28068e-5 m3
- Water [air, unspecified]: 4.83566e-9 m3
- Zinc II [air, unspecified]: 1.65718e-11 kg
- m-Xylene [air, unspecified]: 6.62872e-12 kg
- Azoxystrobin [soil, agricultural]: 8.46564e-9 kg
- Cadmium II [soil, agricultural]: 6.29938e-10 kg
- Chlorothalonil [soil, agricultural]: 3.21277e-11 kg
- Chlorpyrifos methyl [soil, agricultural]: 1.33359e-9 kg
- Chromium III [soil, agricultural]: 6.26912e-9 kg
- Copper ion [soil, agricultural]: 3.16448e-8 kg
- Cyproconazole [soil, agricultural]: 1.40859e-8 kg
- Ethofumesate [soil, agricultural]: 2.43253e-10 kg
- Fenpropimorph [soil, agricultural]: 6.88449e-11 kg
- Fungicides, unspecified [soil, agricultural]: 1.16119e-11 kg
- Glyphosate [soil, agricultural]: 9.91523e-9 kg
- Hexaconazole [soil, agricultural]: 3.56825e-9 kg
- Lead II [soil, agricultural]: 2.17051e-9 kg
- Mercury II [soil, agricultural]: 1.18002e-11 kg
- Metaldehyde [soil, agricultural]: 3.67175e-11 kg
- Metamitron [soil, agricultural]: 9.27113e-10 kg
- Nickel II [soil, agricultural]: 9.16404e-10 kg
- Paraquat [soil, agricultural]: 1.453e-8 kg
- Phenmedipham [soil, agricultural]: 1.69818e-10 kg
- Pyraclostrobin [soil, agricultural]: 6.76337e-9 kg
- Terbufos [soil, agricultural]: 1.85984e-8 kg
- Thiamethoxam [soil, agricultural]: 1.12723e-8 kg
- Zinc II [soil, agricultural]: 9.40699e-9 kg
- BOD5, Biological Oxygen Demand [water, ground-]: 3.13738e-5 kg
- BOD5, Biological Oxygen Demand [water, surface water]: 4.52102e-9 kg
- COD, Chemical Oxygen Demand [water, ground-]: 6.27475e-5 kg
- COD, Chemical Oxygen Demand [water, surface water]: 7.01079e-9 kg
- Cadmium II [water, ground-]: 1.93497e-12 kg
- Cadmium II [water, surface water]: 8.63405e-12 kg
- Calcium II [water, surface water]: 7.57742e-12 kg
- Carbonate [water, surface water]: 7.28668e-11 kg
- Chloride [water, surface water]: 1.52658e-9 kg
- Chlorine [water, surface water]: 9.35891e-11 kg
- Chromium III [water, ground-]: 8.90661e-10 kg
- Chromium III [water, surface water]: 8.16996e-10 kg
- Copper ion [water, ground-]: 1.56218e-10 kg
- Copper ion [water, surface water]: 1.21085e-9 kg
- DOC, Dissolved Organic Carbon [water, ground-]: 2.32398e-5 kg
- DOC, Dissolved Organic Carbon [water, surface water]: 2.59659e-9 kg
- Dissolved solids [water, surface water]: 1.27411e-8 kg
- Lead II [water, ground-]: 1.40679e-11 kg
- Lead II [water, surface water]: 4.24351e-10 kg
- Mercury II [water, ground-]: 1.81751e-12 kg
- Mercury II [water, surface water]: 1.91881e-12 kg
- Nickel II [water, ground-]: 5.28575e-13 kg
- Nickel II [water, surface water]: 5.96148e-10 kg
- Nitrate [water, ground-]: 1.73268e-5 kg
- Nitrogen [water, surface water]: 1.30042e-9 kg
- Oils, non-fossil [water, surface water]: 2.23115e-9 kg
- Phosphate [water, ground-]: 8.02494e-9 kg
- Phosphate [water, surface water]: 4.51492e-8 kg
- Phosphorus [water, surface water]: 2.14138e-8 kg
- Sodium [water, unspecified]: 4.78162e-11 kg
- Sulfur [water, surface water]: 2.0061e-11 kg
- Suspended solids, unspecified [water, surface water]: 5.2256e-9 kg
- TOC, Total Organic Carbon [water, ground-]: 2.32398e-5 kg
- TOC, Total Organic Carbon [water, surface water]: 2.59659e-9 kg
- Water [water, ground-]: 1.67173e-6 m3
- Water [water, surface water]: 7.41683e-6 m3
- Zinc II [water, ground-]: 9.6315e-10 kg
- Zinc II [water, surface water]: 1.45616e-9 kg
