# dichloropropene to generic market for pesticide, unspecified

Dataset: EcoSpold 2, unit process
Geography: GLO
Time period: 2012-01-01 to 2022-12-31
Technology level: current
Classification: ISIC rev.4 ecoinvent: 2011:Manufacture of basic chemicals
Synonyms: 1,3-dichloro-2-propene; 1,3-dichloro-1-propene; dichloro-1,3-propene; 3-chloroorpropenyl chloride; 1,3-D; 3-chloroallyl chloride; 1,3-dichloropropylene; DCP
Scenario: Business-as-Usual
System model: Allocation at the point of substitution
Generated by: Sofia Parada Tur
Database: ecoinvent
isCopyrightProtected: true

## General comment
This is a linking activity which links the product dichloropropene to the generic market for pesticide, unspecified. All chemicals that enter this market provide the function of a pesticide.

## Included activities start
The activity starts with the reception of dichloropropene

## Included activities end
The activity ends with the production of pesticide, unspecified

## Geography
1,3-dichloropropene is used as a pesticide in the United States, Europe, Japan, the Philippines, and Africa. It is phased out in the EU (http://eur-lex.europa.eu/LexUriServ/site/en/oj/2007/l_249/l_24920070925en00110013.pdf).

## Reference product
- pesticide, unspecified: 1 kg; name pesticide; source Agency for Toxic Substances and Disease  2006; By-product classification allocatable product; CPC 346: Fertilizers and pesticides; lognormal variance with pedigree 0.0046, pedigree (1,4,1,5,1)
  production volume 7.232e7 kg
    Calculated from production volume of reference product using the relative outputs. Large uncertainty due to variability of dichloropropene in pesticide
  property price 6.75642 EUR2005
    Calculated value based on data from United Nations Commodity Trade Statistics Database (comtrade.un.org). UN comtrade category: 3808 Insecticides, rodenticides, fungicides, herbicides, anti-sprouting products, plant growth regulators, disinfectants and the like, put up in forms or packings for retail sale or as preparations or articles. Average of years 2015-2019. Average of price of import into 5 main markets (EU, US, JP, CN and BR, based on OEC, https://oec.world/en/profile/hs/pesticides). Last accessed 2022-08-16.
    The prices were converted to EUR based on the annual exchange rates published by the European Central Bank (https://sdw.ecb.europa.eu/quickview.do?SERIES_KEY=120.EXR.A.USD.EUR.SP00.A, last accessed on 2022-02-15) and adjusted for inflation relative to 2005 using the producer price index (PPI) of the euro area, published by eurostat (https://appsso.eurostat.ec.europa.eu/nui/show.do?dataset=sts_inpp_a&lang=en, last accessed on 2022-05-04).
  properties: carbon allocation 0.486978 kg, carbon content 0.486978, carbon content, fossil 0.486978, carbon content, non-fossil 0, dry mass 1 kg, water content 0, water in wet mass 0 kg, wet mass 1 kg

## Inputs from technosphere
- chemical factory, organics: 4.93828e-10, 4.76228e-10 unit (2 suppliers, which the file names only by identifier); sum of these 9.70056e-10 unit
- chlorine, liquid: 1.41559, 1.4679 kg (2 suppliers, which the file names only by identifier); sum of these 2.88349 kg
- dichloropropene: -0.274041 kg
- electricity, medium voltage: 0.0392789, 0.0122563, 0.178736, 0.000364992, 0.00186234, 0.112452, 0.00615099 kWh (7 suppliers, which the file names only by identifier); sum of these 0.351102 kWh
- heat, district or industrial, natural gas: 2.0642, 1.95845, 0.0321824 MJ (3 suppliers, which the file names only by identifier); sum of these 4.05483 MJ
- heat, district or industrial, other than natural gas: 1.11057, 1.15215, 0.000514508 MJ (3 suppliers, which the file names only by identifier); sum of these 2.26324 MJ
- propylene: 0.838273, 0.0151925, 0.793205 kg (3 suppliers, which the file names only by identifier); sum of these 1.64667 kg
- spent solvent mixture: -0.016668, -0.000395667, -0.0168883 kg (3 suppliers, which the file names only by identifier); sum of these -0.033952 kg
- wastewater, unpolluted: -4.32099e-6, -4.167e-6 m3 (2 suppliers, which the file names only by identifier); sum of these -8.48799e-6 m3
- water, completely softened: 1.33951, 0.553005, 0.738764 kg (3 suppliers, which the file names only by identifier); sum of these 2.63128 kg

## Emissions to nature
- Water [air, unspecified]: 0.000539412 m3
- AOX, Adsorbable Organic Halogen [water, surface water]: 0.000363771 kg
- BOD5, Biological Oxygen Demand [water, surface water]: 0.00848799 kg
- COD, Chemical Oxygen Demand [water, surface water]: 0.00848799 kg
- DOC, Dissolved Organic Carbon [water, surface water]: 0.00315268 kg
- TOC, Total Organic Carbon [water, surface water]: 0.00315268 kg
- Water [water, unspecified]: 0.00208338 m3

## Review by Bo Weidema 2012-05-15
Dichloropropene is used as a soil fumigant. The reason for placing the dichloropropene on the generic market for pesticides is that it is a by-product of allyl chloride production (0.113 kg per kg of allyl chloride). Considering that allyl chloride production is 800 Mkg per year (Ullmanns), a production of 90.4 E6 kg dichloropropene results, which will be cleared on the generic market for pesticides (a more specific substitution may be modelled if data become available. Dichloropropene is itself - together with chloropicrin and dazomet - used as a substitute for methyl bromine which is being phased out).
