# treatment of sewage sludge, 97% water, WWT, WW from LCD backlight production, landfarming

Dataset: EcoSpold 2, unit process
Geography: CH
Time period: 2000-01-01 to 2022-12-31
Technology level: current
Classification: ISIC rev.4 ecoinvent: 3821:Treatment and disposal of non-hazardous waste
Scenario: Business-as-Usual
System model: Allocation at the point of substitution
Generated by: Nikolia Stoikou
Database: ecoinvent
isCopyrightProtected: true

## General comment
The process represents the treatment of a waste (sewage sludge) that is exclusively produced from another waste treatment. Recommended use of this dataset: to be used within the specific chain of treatments for 'wastewater from LCD backlight production'. Share of biogenic carbon in the sludge: 0%. "LCD" stands for "Liquid-crystal display".

## Included activities start
The activity starts with the waste being available for landfarming. Collection and transportation of the waste to this process is not included.

## Included activities end
The activity ends with the waste being treated and waste-specific emissions from the landfarming process are released to the environment (air, water and soil). The activity is considering local fate of emissions and the initial specific wastewater composition (generating the sewage sludge). Further, it includes provision of fertiliser functions for N, P, K, if present in the sludge.

## Geography
The site has mean annual temperature (MAT) of 9.5 degC, mean annual precipitation (MAP) of 1483.00559816076 mm/year, mean annual actual evaporation (EAT) of 528.63778611689 mm/year. Climate will influence the local fate emissions based on the elemental composition of the sludge as well as water evaporation to air (= consumptive water use).
References: UN data, 2020. Precipitation, Environment Statistics Database, United Nations Statistics Division Available at: http://data.un.org/Data.aspx?q=precipitation&d=ENV&f=variableID%3a6;
World Bank, 2022. Surface area (sq.km), World Bank Group Available at: https://data.worldbank.org/indicator/AG.SRF.TOTL.K2;
MeteoSwiss, 2022. Data on Swiss temperature mean, Federal Department of Home Affairs FDHA. Federal Office of Meteorology and Climatology. Swiss Climate Available at: https://www.MeteoSwiss.admin.ch/home/climate/swiss-climate-in-detail/Swiss-temperature-mean/Data-on-the-Swiss-temperature-mean.html?query=TEMPERATURE+DATA&topic=/content/MeteoSwiss/tags/topics/klima&pageIndex=0&tab=search_tab;
Doka G.,2021. A model for composition-specific life cycle inventories of regionalised wastewater fates, Zurich, Switzerland. http://www.doka.ch/publications.htm

## Technology
Landfarming is the process of spreading a substrate on agricultural soil. Sewage sludge is generated in the wastewater treatment of wastewater from LCD backlight production. Spreading of liquid sewage sludge (97w% water content) on agricultural fields with mobile vacuum tanker.

## Reference product
- organic nitrogen fertiliser, as N: 1 kg; By-product classification allocatable product; CPC 34659: Fertilizers n.e.c.; lognormal variance with pedigree 0.26536, pedigree (1,1,1,1,1)
  gross fertilizer function provided from sewage sludge spreading on agricultural fields.
  Uncertainty: Uncertainty calculated from upstream wastewater technosphere fate uncertainty, wastewater composition uncertainty, and treatment model uncertainty
  production volume 7.14245e-8 kg
    Calculated in proportion to wastewater reference product.
  property nitrogen content 1
    Nitrogen content (on a dry matter basis) of organic nitrogen fertiliser, as N is calculated from the molecular formula of the substance (Nitrogen).
  property price 0.473 EUR2005
    Set equal to the price of the corresponding inorganic fertiliser
  properties: carbon allocation 0 kg, carbon content 0, carbon content, fossil 0, carbon content, non-fossil 0, dry mass 1 kg, water content 0, water in wet mass 0 kg, wet mass 1 kg

## Inputs from technosphere
- aluminium, wrought alloy: 0.000348621 kg
- argon, liquid: 6.39191e-8, 3.03432e-7 kg (2 suppliers, which the file names only by identifier); sum of these 3.67351e-7 kg
- cable, ribbon cable, 20-pin, with plugs: 3.56946e-5 kg
- chemical, inorganic: 2.18025e-6 kg
- chemical, organic: 2.9118e-6 kg
- copper, cathode: 7.08699e-6 kg
- diethyl ether, without water, in 99.95% solution state: 7.87467e-7, 1.78272e-7 kg (2 suppliers, which the file names only by identifier); sum of these 9.65739e-7 kg
- electricity, medium voltage: 0.0128927 kWh
- ethanol, without water, in 99.7% solution state, from ethylene: 1.49328e-7, 3.32507e-7 kg (2 suppliers, which the file names only by identifier); sum of these 4.81834e-7 kg
- glass tube, borosilicate: 0.000430836 kg
- hazardous waste, for incineration: -4.73836e-5, -2.27866e-5, -5.95628e-7 kg (3 suppliers, which the file names only by identifier); sum of these -7.07658e-5 kg
- hazardous waste, for underground deposit: -2.63003e-9, -1.69407e-10 kg (2 suppliers, which the file names only by identifier); sum of these -2.79944e-9 kg
- heat, district or industrial, natural gas: 3.94038e-6 MJ
- inert waste, for final disposal: -1.02494e-10, -1.57435e-8 kg (2 suppliers, which the file names only by identifier); sum of these -1.5846e-8 kg
- krypton, gaseous: 6.5666e-7 kg
- lead: 1.1104e-5 kg
- lead in car shredder residue: -1.26537e-11, -8.37572e-10 kg (2 suppliers, which the file names only by identifier); sum of these -8.50226e-10 kg
- mercury: 4.15228e-8 kg
- polycarbonate: 0.00118635 kg
- polyethylene terephthalate, granulate, amorphous: 0.000285147 kg
- polymethyl methacrylate, sheet: 0.00787782 kg
- printed wiring board mounting facility: 2.18624e-9 unit
- spent activated carbon with mercury: -9.59496e-12 kg
- steel, chromium steel 18/8, hot rolled: 0.000262244 kg
- synthetic rubber: 6.25443e-6 kg
- waste paperboard: -1.2628e-9, -8.23618e-10, -1.53621e-7, -8.26957e-9, -2.03089e-8, -4.44934e-10, -4.56303e-9, -1.1042e-10 kg (8 suppliers, which the file names only by identifier); sum of these -1.89404e-7 kg
- waste plastic, industrial electronics: -2.37676e-7, -1.57324e-5 kg (2 suppliers, which the file names only by identifier); sum of these -1.59701e-5 kg
- waste polyethylene: -1.15462e-6, -3.02585e-8, -8.08301e-6, -7.71475e-8, -5.83454e-9, -3.18647e-8, -1.2873e-8, -1.00069e-6 kg (8 suppliers, which the file names only by identifier); sum of these -1.03963e-5 kg
- waste polypropylene: -3.50499e-8, -2.72464e-6, -1.5886e-8, -2.2008e-5, -8.67596e-8, -2.10053e-7, -8.23864e-8, -3.14375e-6 kg (8 suppliers, which the file names only by identifier); sum of these -2.83065e-5 kg
- wastewater from liquid crystal display backlight production: -4.80802e-6, -0.00099424 m3 (2 suppliers, which the file names only by identifier); sum of these -0.000999048 m3

## Inputs from nature
- Water, unspecified natural origin [natural resource, in water]: 0.0019981 m3

## Emissions to nature
- Diethyl ether [air, urban air close to ground]: 9.63658e-7 kg
- Ethanol [air, urban air close to ground]: 4.81834e-7 kg
- Nitrogen oxides [air, urban air close to ground]: 0.000303877 kg
- Water [air, unspecified]: 0.000121884 m3
- Water [water, unspecified]: 0.000877164 m3
