# treatment of sewage sludge, 75% water, WWT, WW from concrete production, sanitary landfill

Dataset: EcoSpold 2, unit process
Geography: GLO
Time period: 1994-01-01 to 2022-12-31
Technology level: current
Classification: ISIC rev.4 ecoinvent: 3821:Treatment and disposal of non-hazardous waste
Scenario: Business-as-Usual
System model: Allocation at the point of substitution
Generated by: Nikolia Stoikou
Database: ecoinvent
isCopyrightProtected: true

## General comment
The process represents the treatment of a waste (sewage sludge) that is exclusively generated from another waste treatment. Sewage sludge is generated in the wastewater treatment of 'wastewater from concrete production'. Recommended use of this dataset: to be used within the specific chain of treatments for 'wastewater from concrete production'. Share of biogenic carbon in the sludge: 0%. Landfill gas capture and utilisation generates 0.03321 kWh of electricity and 0.0599 MJ of useful heat. 0.002598 kg waste mass remains in the landfill even after the long term period.

## Included activities start
The activity starts with the waste being available at the gate of the treatment facility. Collection and transportation of the waste to the treatment plant is not included.

## Included activities end
The activity ends with the waste being treated and waste-specific emissions from the landfill are released to the environment (air due to landfil gas and water due to landfil leachate).

## Geography
Landfill site with mean annual temperature (MAT) of 16.743579766537 degC, mean annual precipitation (MAP) of 1250.84108527132 mm/year, and net infiltration of 790.252035689178 mm/year.The leachate percolating through the landfill has an average residence time of 6.33 years.
References: UN data, 2020. Precipitation, Environment Statistics Database, United Nations Statistics Division Available at: http://data.un.org/Data.aspx?q=precipitation&d=ENV&f=variableID%3a6;
World Bank, 2022. Surface area (sq.km), World Bank Group Available at: https://data.worldbank.org/indicator/AG.SRF.TOTL.K2;
Doka G.,2021. A model for composition-specific life cycle inventories of regionalised wastewater fates, Zurich, Switzerland. http://www.doka.ch/publications.htm

## Technology
Sanitary (controlled) landfill for municipal solid waste. Ultimate average landfill height is 20 meters. Operation phase duration is 30 years. The total raw landfill gas mass produced in the landfill from this waste is 0.06994 kg. The total CH4 mass in the raw landfill gas is 0.03261 kg. Percentage of landfill gas directly emitted is 47w%. Percentage of landfill gas captured and flared is 18.02w%. Percentage of landfill gas captured and utilised is 34.98%. Conversion efficiencies are 27.8e% for electricity and 13.5e% for useful heat. Leachate generated during the first 100 years is collected and treated region-specifically before emission. Based on average waste composition and climate data the end of carbonate phase is estimated to be reached 2'863 years after waste deposition.

## Reference product
- heat, district or industrial, other than natural gas: 1 MJ; By-product classification allocatable product; CPC 17300: Steam and hot water; lognormal variance with pedigree 0.11909, pedigree (1,1,1,1,1)
  Net production of heat from landfill gas utilisation.
  Uncertainty: Uncertainty calculated depending on waste input and uncertainty of transfer coefficients in landfill to landfill gas, uncertainty in gas capture and utilisation.
  production volume 64156.9 MJ
    Calculated from the production volume of the reference product in proportion to the respective output amounts.
  property corresponding fuel use, propane, furnace >100kW 0 MJ; name fuel_use
    Lower heating value of the fuel input related to the heat/electricity output, taken directly from ecoinvent v3.0 dataset "heat production, natural gas, at industrial furnace >100kW, GLO 2000".
  property price 0.0106 EUR2005
    Average European district heat price from Ecoheatcool and Euroheat 2005-2006, Ecoheat Work package 1: The European heat market. Final report. 10.6 EUR/GJ i s the price of district heat. http://www.solarthermalworld.org/files/Ecoheatcool%20WP1%20Web.pdf?download
  properties: carbon allocation 0 kg, carbon content 0, carbon content, fossil 0, carbon content, non-fossil 0, dry mass 1 kg, heating value, net 1 MJ, water content 0, water in wet mass 0 kg, wet mass 1 kg

## Inputs from technosphere
- acetic acid, without water, in 98% solution state: 3.38716e-6 kg
- alkylbenzene sulfonate, linear, petrochemical: 8.83e-6 kg
- aluminium, cast alloy: 4.45478e-7 kg
- anhydrite: 4.93849e-6 kg
- cement, ART: 4.63637e-6 kg
- cement, CEM II/A: 6.16002e-8, 5.91903e-5, 4.11269e-6, 2.9192e-8 kg (4 suppliers, which the file names only by identifier); sum of these 6.33938e-5 kg
- cement, CEM II/B: 3.31445e-5, 8.67432e-6, 0.00046875 kg (3 suppliers, which the file names only by identifier); sum of these 0.000510569 kg
- cement, CEM II/B-V: 1.71442e-5 kg
- cement, CEM III/A: 0.000467563, 1.95385e-7, 0.00672839, 7.5607e-6 kg (4 suppliers, which the file names only by identifier); sum of these 0.00720371 kg
- cement, CP II-E: 0.000129918 kg
- cement, CP II-F: 6.72537e-5 kg
- cement, CP III: 0.00102332 kg
- cement, Portland: 0.000571788, 7.9149e-6, 1.192e-5, 1.3217e-5, 0.000404099, 0.000221525, 7.81595e-5, 0.00585916, 8.72985e-7 kg (9 suppliers, which the file names only by identifier); sum of these 0.00716866 kg
- cement, type ICo: 2.18714e-5 kg
- cement, type IP: 2.29129e-5 kg
- cement, type general use: 1.59644e-5 kg
- chemical, organic: 7.21748e-5 kg
- clay pit infrastructure: 7.73673e-14 unit
- concrete mixing factory: 2.47681e-11 unit
- concrete, 25-30MPa: 1.59002e-7 m3
- concrete, 25MPa: 1.15701e-8, 5.00983e-9, 1.9262e-6, 2.33964e-9, 7.92112e-8, 7.79481e-8 m3 (6 suppliers, which the file names only by identifier); sum of these 2.10228e-6 m3
- diesel, burned in building machine: 0.00056644 MJ
- electricity, medium voltage: 2.16466e-6, 2.92284e-6, 4.2036e-6, 8.7747e-7, 7.39501e-5, 5.13963e-5, 0.000277563, 2.77582e-6, 1.41718e-12, 1.03945e-6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 kWh (78 suppliers, which the file names only by identifier); sum of these 0.00169067 kWh
- ethylene oxide: 9.32674e-6, 4.22189e-6 kg (2 suppliers, which the file names only by identifier); sum of these 1.35486e-5 kg
- expanded clay: 0.000150825 kg
- fatty alcohol: 5.85238e-8 kg
- gravel, crushed: 7.40352e-6, 0.00642715, 0.0218821, 0.000112136, 0.00623949 kg (5 suppliers, which the file names only by identifier); sum of these 0.0346683 kg
- gravel, round: 0.0266045, 6.45163e-6 kg (2 suppliers, which the file names only by identifier); sum of these 0.0266109 kg
- gypsum, mineral: 3.66912e-6 kg
- heat, central or small-scale, other than natural gas: 4.96892e-6, 6.56977e-5 MJ (2 suppliers, which the file names only by identifier); sum of these 7.06666e-5 MJ
- heat, district or industrial, natural gas: 6.7249e-5, 1.93231e-5, 0.000258835, 1.35574e-6 MJ (4 suppliers, which the file names only by identifier); sum of these 0.000346763 MJ
- heat, district or industrial, other than natural gas: 9.22519e-5, 0.0002742, 0.00121973 MJ (3 suppliers, which the file names only by identifier); sum of these 0.00158618 MJ
- lubricating oil: 5.06534e-6, 9.52398e-7 kg (2 suppliers, which the file names only by identifier); sum of these 6.01774e-6 kg
- municipal solid waste: -4.56423e-11, -2.63064e-9, -9.84107e-12, -3.228e-8, -1.15007e-11 kg (5 suppliers, which the file names only by identifier); sum of these -3.49777e-8 kg
- packing, clay product: 0.000463277 kg
- quicklime, milled, packed: 2.63493e-5 kg
- reinforcing steel: 0.00018273 kg
- sand: 0.00328649, 0.000549875, 7.25154e-6, 0.0412095 kg (4 suppliers, which the file names only by identifier); sum of these 0.0450531 kg
- scrap steel: -1.68257e-10, -5.12833e-7, -1.32803e-7 kg (3 suppliers, which the file names only by identifier); sum of these -6.45805e-7 kg
- steel, low-alloyed, hot rolled: 1.29724e-6 kg
- synthetic rubber: 1.12072e-6 kg
- tap water: 2.45267e-5, 0.00463063, 0.00169664, 6.1385e-5, 0.00937764, 9.04414e-5, 0.00743085, 0.000117466, 8.32812e-5, 0.000956592 kg (10 suppliers, which the file names only by identifier); sum of these 0.0244694 kg
- waste concrete: -6.43853e-7, -0.00289739, -0.000182105 kg (3 suppliers, which the file names only by identifier); sum of these -0.00308014 kg
- waste mineral oil: -7.77053e-9, -1.03236e-6, -3.13884e-7 kg (3 suppliers, which the file names only by identifier); sum of these -1.35402e-6 kg
- waste rubber, unspecified: -1.62616e-8, -3.87366e-7, -5.33175e-7 kg (3 suppliers, which the file names only by identifier); sum of these -9.36803e-7 kg
- wastewater from concrete production: -2.20194e-8, -5.31365e-6 m3 (2 suppliers, which the file names only by identifier); sum of these -5.33567e-6 m3
- wastewater, unpolluted: -2.86528e-8, -6.37534e-6 m3 (2 suppliers, which the file names only by identifier); sum of these -6.40399e-6 m3

## Inputs from nature
- Water, unspecified natural origin [natural resource, in water]: 4.26782e-6 m3

## Emissions to nature
- Carbon dioxide, fossil [air, non-urban air or from high stacks]: 2.00779e-6 kg
- Water [air, unspecified]: 2.25729e-6 m3
- Chlorides, unspecified [water, unspecified]: 8.45766e-14 kg
- Copper ion [water, unspecified]: 4.24252e-13 kg
- Iron ion [water, unspecified]: 4.24252e-13 kg
- Oils, unspecified [water, unspecified]: 6.35009e-12 kg
- Suspended solids, unspecified [water, unspecified]: 1.27002e-11 kg
- Water [water, unspecified]: 5.20331e-6 m3
