# treatment of wastewater from pig iron production, wastewater treatment

Dataset: EcoSpold 2, unit process
Geography: CH
Time period: 2010-01-01 to 2022-12-31
Technology level: current
Classification: ISIC rev.4 ecoinvent: 3700:Sewerage
Scenario: Business-as-Usual
System model: Allocation at the point of substitution
Generated by: Nikolia Stoikou
Database: ecoinvent
isCopyrightProtected: true

## General comment
This dataset represents the treatment of a wastewater, generated from an ordinary transforming activity. Purification in wastewater treatment of 'wastewater from pig iron production'. Recommended use of this dataset: to be used for wastewaters, generated from ordinary transforming activities, of equal or similar composition. The wastewater has a content of TOC: 0.0000041 kg/m3, COD: 0.00002 kg/m3 and BOD: 0.00001 kg/m3. TOC is equal to C present in the wastewater, COD is calculated as TOC/0.2565 and BOD is calculated as COD/0.53034. Detailed elemental composition can be found in the properties of the wastewater treated. Share of biogenic carbon in the sludge: 0%.

## Included activities start
The activity starts with the wastewater being available at the gate of the treatment facility. Collection and transportation of the wastewater to the treatment plant is not included.

## Included activities end
The activity ends with the wastewater being treated and waste-specific emissions released to the environment. Expenditures from treatment of wastewater in waste treatment plant are included as well as relevant infrastructure of the plant. Emissions from any sludge digestion, biogas generation and utilization (heeding specific wastewater composition) are also included. Waste-specific direct emissions of untreated wastewater and required territory-specific infrastructure for sewers are not contained within this dataset but instead in the regional market datasets for this wastewater.

## Geography
The site has mean annual temperature (MAT) of 9.5 degC, mean annual precipitation (MAP) of 1483.00559816076 mm/year, mean annual actual evaporation (EAT) of 528.63778611689 mm/year. In the WWT plant, 0% of its water input are lost due to evaporation from pools, 0.00000022% of water is *gained* from organic mass degradation, and 0.00000776% is removed off site via sludge disposal. (References: UN data, 2020. Precipitation, Environment Statistics Database, United Nations Statistics Division Available at: http://data.un.org/Data.aspx?q=precipitation&d=ENV&f=variableID%3a6; World Bank, 2022. Surface area (sq.km), World Bank Group Available at: https://data.worldbank.org/indicator/AG.SRF.TOTL.K2; MeteoSwiss, 2022. Data on Swiss temperature mean, Federal Department of Home Affairs FDHA. Federal Office of Meteorology and Climatology. Swiss Climate Available at: https://www.MeteoSwiss.admin.ch/home/climate/swiss-climate-in-detail/Swiss-temperature-mean/Data-on-the-Swiss-temperature-mean.html?query=TEMPERATURE+DATA&topic=/content/MeteoSwiss/tags/topics/klima&pageIndex=0&tab=search_tab; Doka G.,2021. A model for composition-specific life cycle inventories of regionalised wastewater fates, Zurich, Switzerland. http://www.doka.ch/publications.htm)

## Technology
This activity represents the treatment of a specific wastewater in a WWT plant (while direct emissions and sewering are heeded in the upstream market dataset for this wastewater). The size of the treatment plant infrastructure is for a national average territory situation. The assumed size of the WWTP treats 90.6 Mio m3 per year. The mixture of WWTP with one, two, or three stages is 0%-11.2%-88.8%. The actual, waste-specific oxygen requirement in the biological stages is 0.000003334kg O. Generated waste-specific raw sludge is treated with anaerobic digestion. The digestion process produces 0.003548 litres of biogas with an energy content of 0.00008055MJ. 23.6% of the biogas is utilized for energy. The remainder is flared. The gross electric efficiency is 26.564%. The gross thermal efficiency is 47.853%. After digestion, the remaining total sludge mass (dry matter) is 0.00004165kg DM.

## Reference product
- iron scrap, sorted, pressed: 1 kg; By-product classification Recyclable; CPC 39310: Slag, dross, scalings and other waste from the manufacture of iron or steel; lognormal variance with pedigree 0.3109, pedigree (1,1,1,1,1)
  scrap output from used infrastructure for wastewater treatment plant.
  Uncertainty: Uncertainty calculated from wastewater technosphere fate uncertainty and treatment infrastructure uncertainty.
  production volume 5267.48 kg
    Calculated in proportion to wastewater reference product.
  property price 0.175 EUR2005
    Temporary price data. Calculated as 90% of purchasers price based on: 2005 import and export prices (total trades (USD) divided by total weight (kg) in biggest economies of the world: EU27, USA, Brasil, China, India, Japan and Russia) from UN Commodity Trade Statistics Database (http://data.un.org/Explorer.aspxDatabase [Accessed 2011.06.20]). Commodity: Waste or scrap, of cast iron
  properties: carbon allocation 0 kg, carbon content 0, carbon content, fossil 0, carbon content, non-fossil 0, dry mass 1 kg, water content 0, water in wet mass 0 kg, wet mass 1 kg

## Inputs from technosphere
- aluminium oxide factory: 2.16113e-12 unit
- basic oxygen furnace dust: -0.00645579 kg
- basic oxygen furnace dust, for recovery: 0.000725937 kg
- basic oxygen furnace secondary metallurgy slag: -0.000100119 kg
- basic oxygen furnace secondary metallurgy slag, for recovery: 4.05137e-6 kg
- basic oxygen furnace slag: -0.0349143 kg
- basic oxygen furnace slag, for recovery: 0.00102428 kg
- basic oxygen furnace sludge: -0.000100119 kg
- basic oxygen furnace sludge, for recovery: 1.13641e-5 kg
- blast furnace: 7.52588e-13 unit
- blast furnace dust: -0.000635919 kg
- blast furnace dust, for recovery: 0.000506012 kg
- blast furnace slag: -0.0155225 kg
- blast furnace sludge: -0.000204241, -0.000119459 kg (2 suppliers, which the file names only by identifier); sum of these -0.000323701 kg
- blast furnace sludge, for recovery: 0.000180591 kg
- blast oxygen furnace converter: 4.43777e-12 unit
- coke: 0.659293 MJ
- compressed air, 600 kPa gauge: 0.00480031 m3
- compressed air, 800 kPa gauge: 0.000164018 m3
- dolomite: 0.00147188 kg
- electric arc furnace secondary metallurgy slag, for recovery: 0.000173192 kg
- electric arc furnace slag, for recovery: 0.000211236 kg
- electricity, medium voltage: 0.0109063 kWh
- ferromanganese, high-coal, 74.5% Mn: 0.00253468 kg
- ferronickel: 0.00260764 kg
- hard coal: 0.00846683 kg
- inert waste, for final disposal: -0.000263379 kg
- iron ore concentrate: 0.0847086 kg
- iron pellet: 0.0225782 kg
- iron scrap, sorted, pressed: 0.0753295 kg
- iron sinter: 0.0592678 kg
- lime, hydrated, loose weight: 0.00228215 kg
- limestone, unprocessed: 0.0118974 kg
- mill scale: -2.20674e-5 kg
- molybdenite: 3.45651e-5 kg
- natural gas, high pressure: 0.000709447, 5.08329e-6 m3 (2 suppliers, which the file names only by identifier); sum of these 0.00071453 m3
- oxygen, liquid: 0.0259796 kg
- pig iron: 0.287974 kg
- quicklime, in pieces, loose: 0.015804 kg
- refractory, fireclay, packed: 0.000112891 kg
- wastewater from pig iron production: -1.12057e-5, -0.000445882 m3 (2 suppliers, which the file names only by identifier); sum of these -0.000457087 m3

## Inputs from nature
- Oxygen [natural resource, in air]: 0.0102205 kg
- Water, cooling, unspecified natural origin [natural resource, in water]: 0.00198209 m3
- Water, unspecified natural origin [natural resource, in water]: 2.7894e-5 m3

## Emissions to nature
- Arsenic ion [air, unspecified]: 2.59335e-10 kg
- Benzo(a)pyrene [air, unspecified]: 1.76102e-10 kg
- Cadmium II [air, unspecified]: 6.43072e-10 kg
- Carbon dioxide, fossil [air, unspecified]: 0.0898752 kg
- Carbon monoxide, fossil [air, unspecified]: 0.00219389 kg
- Chromium III [air, unspecified]: 1.09497e-8 kg
- Copper ion [air, unspecified]: 4.90798e-8 kg
- Dioxins, measured as 2,3,7,8-tetrachlorodibenzo-p-dioxin [air, unspecified]: 1.55301e-13 kg
- Heat, waste [air, unspecified]: 0.0681314 MJ
- Hydrochloric acid [air, unspecified]: 2.97783e-6 kg
- Hydrogen fluoride [air, unspecified]: 1.56559e-7 kg
- Hydrogen sulfide [air, unspecified]: 6.06507e-7 kg
- Iron ion [air, unspecified]: 1.36964e-5 kg
- Lead II [air, unspecified]: 1.72987e-7 kg
- Manganese II [air, unspecified]: 2.35604e-7 kg
- Mercury II [air, unspecified]: 3.93301e-10 kg
- Methane, fossil [air, unspecified]: 1.04608e-5 kg
- NMVOC, non-methane volatile organic compounds [air, unspecified]: 1.7101e-6 kg
- Nickel II [air, unspecified]: 2.20679e-9 kg
- Nitrogen oxides [air, unspecified]: 5.98209e-5 kg
- PAH, polycyclic aromatic hydrocarbons [air, unspecified]: 4.2688e-9 kg
- Particulate Matter, < 2.5 um [air, unspecified]: 2.69231e-5 kg
- Particulate Matter, > 10 um [air, unspecified]: 8.19652e-6 kg
- Particulate Matter, > 2.5 um and < 10um [air, unspecified]: 1.78461e-6 kg
- Polychlorinated biphenyls [air, unspecified]: 5.70865e-12 kg
- Selenium IV [air, unspecified]: 4.43059e-9 kg
- Sulfur dioxide [air, unspecified]: 4.74984e-5 kg
- Titanium ion [air, unspecified]: 5.68832e-10 kg
- Vanadium V [air, unspecified]: 8.43005e-10 kg
- Water [air, unspecified]: 0.00206413 m3
- Water [water, unspecified]: 5.47666e-5 m3
