# treatment of waste paint, hazardous waste incineration, with energy recovery

Dataset: EcoSpold 2, unit process
Geography: CH
Time period: 1997-01-01 to 2022-12-31
Technology level: current
Classification: ISIC rev.4 ecoinvent: 3822:Treatment and disposal of hazardous waste
Tags: ConvertedDataset; Treatment
Scenario: Business-as-Usual
System model: Allocation at the point of substitution
Share of production covered: 39 %
Generated by: Gabor Doka (obsolete)
Published in: Doka G. 2008
Database: ecoinvent
isCopyrightProtected: true

## General comment
Inventoried waste contains 100% paint (remains); . waste composition (wet, in ppm): upper heating value 10.86 MJ/kg; lower heating value 10.14 MJ/kg; H2O n.a.; O 290300; H 36288; C 651510; S n.a.; N n.a.; P n.a.; B n.a.; Cl 1600; Br n.a.; F n.a.; I n.a.; Ag n.a.; As 2.5; Ba n.a.; Cd 5.0622; Co 388.23; Cr 1040.7; Cu 59; Hg 0.6; Mn n.a.; Mo 38.619; Ni 15; Pb 15246; Sb n.a.; Se n.a.; Sn 256.78; V n.a.; Zn 3251.5; Be n.a.; Sc n.a.; Sr n.a.; Ti n.a.; Tl n.a.; W n.a.; Si n.a.; Fe n.a.; Ca n.a.; Al n.a.; K n.a.; Mg n.a.; Na n.a.; Share of carbon in waste that is biogenic 0%. Net energy produced in HWI: 17.11MJ/kg thermal energy and 1.27MJ/kg electric energy. Allocation of energy production: no substitution or expansion. 100% of burden allocated to waste disposal function of HWI. One kg of this waste produces 0.02958 kg of residues, which are landfilled. Additional solidification with 0.01183 kg of cement.
[This dataset is meant to replace the following datasets:]

## Included activities end
waste-specific air and water emissions from incineration, auxiliary material consumption for flue gas cleaning. Short-term emissions to river water and long-term emissions to ground water from residual material landfill (from solidified fly ashes and scrubber slugde). Process energy demands for HWI.

## Geography
Specific to the technology encountered in Switzerland in 2000. Well applicable to modern incineration practices in Europe or North America or Japan.

## Technology
Swiss HWI plant in 2000 with wet flue gas scrubber and low-dust SCR DeNOx facility. Gross thermal efficiency 74.4% and gross electric efficiency 10%.

## Time period
Transfer coefficients for modern Swiss MSWI. Emission speciation based on early 90ies data.

## Reference product
- heat, district or industrial, other than natural gas: 1 MJ; name BP2; By-product classification allocatable product; CPC 17300: Steam and hot water; lognormal variance with pedigree 0.120025, pedigree (1,1,1,2,1)
  production volume 2.62981e7 MJ
    Calculated based on the production volume of the reference product.
  property corresponding fuel use, propane, furnace >100kW 0 MJ; name fuel_use
    Lower heating value of the fuel input related to the heat/electricity output, taken directly from ecoinvent v3.0 dataset "heat production, natural gas, at industrial furnace >100kW, GLO 2000".
  property price 0.0106 EUR2005
    Average European district heat price from Ecoheatcool and Euroheat 2005-2006, Ecoheat Work package 1: The European heat market. Final report. 10.6 EUR/GJ i s the price of district heat. http://www.solarthermalworld.org/files/Ecoheatcool%20WP1%20Web.pdf?download
  properties: carbon allocation 0 kg, carbon content 0, heating value, net 1 MJ

## Inputs from technosphere
- N-methyl-2-pyrrolidone: 5.45389e-10 kg
- acrylic varnish, with water, in 53% solution state: 1.06205e-6 kg
- alkyd paint, white, without solvent, in 60% solution state: 0.000198399, 0.000941826 kg (2 suppliers, which the file names only by identifier); sum of these 0.00114023 kg
- aluminium, cast alloy: 7.5974e-7 kg
- borax, anhydrous, powder: 2.43748e-7 kg
- chemical factory, organics: 5.87432e-15 unit
- chemical, organic: 2.93106e-8 kg
- compressed air, 1000 kPa gauge: 1.02414e-7 m3
- containerboard, fluting medium: 0.00086508 kg
- containerboard, linerboard: 0.00106314 kg
- copper, cathode: 1.51948e-6 kg
- cyclic N-compound: 7.72458e-9 kg
- dichloromethane: 1.5063e-10 kg
- diesel, burned in building machine: 0.00010259 MJ
- diesel, low-sulfur: 4.02721e-7 kg
- diethylene glycol: 2.10576e-9 kg
- electricity, medium voltage: 0.000253247, 0.000222957 kWh (2 suppliers, which the file names only by identifier); sum of these 0.000476203 kWh
- energy and auxilliary inputs, metal working factory: 1.83038e-13, 4.0817e-14 kg (2 suppliers, which the file names only by identifier); sum of these 2.23855e-13 kg
- ethylene vinyl acetate copolymer: 1.13169e-6 kg
- flat glass, uncoated: 8.64897e-6, 4.20003e-5 kg (2 suppliers, which the file names only by identifier); sum of these 5.06493e-5 kg
- glass wool mat: 9.28571e-6 kg
- glycerine: 2.46976e-9 kg
- hard coal: 9.35717e-7 kg
- heat, district or industrial, natural gas: 4.53824e-5 MJ
- heavy fuel oil: 6.3388e-7 kg
- light fuel oil: 5.72179e-7 kg
- lime, hydrated, packed: 2.18279e-7 kg
- liquefied petroleum gas: 1.3325e-6, 6.77682e-9 kg (2 suppliers, which the file names only by identifier); sum of these 1.33928e-6 kg
- maize starch: 2.2303e-5 kg
- metal working factory: 2.23855e-13 unit
- monoethanolamine: 3.56949e-9 kg
- municipal solid waste: -3.48212e-8 kg
- natural gas, high pressure: 3.59032e-5, 2.57252e-7 m3 (2 suppliers, which the file names only by identifier); sum of these 3.61604e-5 m3
- nitrogen, liquid: 5.71342e-9 kg
- packaging box factory: 2.48723e-12 unit
- packaging film, low density polyethylene: 2.02332e-6 kg
- paper, woodcontaining, supercalendered: 1.29407e-7 kg
- polyol: 1.05764e-5 kg
- polyvinylchloride, bulk polymerised: 1.01299e-6 kg
- potato starch: 4.05667e-6 kg
- printing ink, offset, without solvent, in 47.5% solution state: 3.16873e-6 kg
- reinforcing steel: 0.00369245 kg
- sand: 1.57921e-5, 8.19851e-8, 1.89082e-7, 0.00102768 kg (4 suppliers, which the file names only by identifier); sum of these 0.00104375 kg
- scrap aluminium: -2.40995e-7, -1.13069e-8, -5.07437e-7 kg (3 suppliers, which the file names only by identifier); sum of these -7.5974e-7 kg
- scrap copper: -4.77406e-8, -1.01754e-6, -2.14251e-6 kg (3 suppliers, which the file names only by identifier); sum of these -3.20779e-6 kg
- scrap steel: -1.11981e-7, -0.000274489, -8.83855e-5 kg (3 suppliers, which the file names only by identifier); sum of these -0.000362987 kg
- silicon, metallurgical grade: 1.07511e-7 kg
- sludge from pulp and paper production: -3.18665e-8, -2.8757e-6 kg (2 suppliers, which the file names only by identifier); sum of these -2.90757e-6 kg
- sodium hydroxide, without water, in 50% solution state: 6.96423e-7 kg
- spent solvent mixture: -3.82683e-12, -1.63341e-10 kg (2 suppliers, which the file names only by identifier); sum of these -1.67168e-10 kg
- steel, low-alloyed: 0.000362987 kg
- styrene-acrylonitrile copolymer: 8.68674e-8 kg
- tap water: 0.000487535 kg
- toluene diisocyanate: 4.45398e-6 kg
- triphenyl phosphate: 1.15641e-8 kg
- urea: 2.99075e-9 kg
- waste foundry sand: -0.000936446 kg
- waste glass: -1.56185e-7, -3.74116e-7, -4.05907e-6, -3.49044e-8, -7.71031e-6, -5.30043e-8, -3.82532e-5, -8.48742e-9 kg (8 suppliers, which the file names only by identifier); sum of these -5.06493e-5 kg
- waste mineral oil: -1.26181e-9, -5.09699e-8 kg (2 suppliers, which the file names only by identifier); sum of these -5.22318e-8 kg
- waste mineral wool: -6.56349e-6, -3.07121e-8, -2.69151e-6 kg (3 suppliers, which the file names only by identifier); sum of these -9.28571e-6 kg
- waste paint: -0.00107341, -3.19392e-7, -0.000106435 kg (3 suppliers, which the file names only by identifier); sum of these -0.00118016 kg
- waste paper, unsorted: -1.07156e-8, -1.07156e-8 kg (2 suppliers, which the file names only by identifier); sum of these -2.14311e-8 kg
- waste plastic, mixture: -1.3795e-7 kg
- waste polyurethane: -4.42023e-8 kg
- waste polyvinylchloride: -5.68501e-10, -2.9483e-9, -1.25431e-9, -3.10481e-9, -7.51704e-9, -1.12503e-7, -9.75047e-8, -7.87585e-7 kg (8 suppliers, which the file names only by identifier); sum of these -1.01299e-6 kg
- wastewater, average: -2.04936e-13, -8.15456e-12 m3 (2 suppliers, which the file names only by identifier); sum of these -8.3595e-12 m3
- water, deionised: 1.09659e-9, 3.0463e-7 kg (2 suppliers, which the file names only by identifier); sum of these 3.05726e-7 kg
- wood chips, dry, measured as dry mass: 1.40821e-6 kg
- zinc: 1.68831e-6 kg

## Inputs from nature
- Oxygen [natural resource, in air]: 6.48078e-5 kg
- Water, cooling, unspecified natural origin [natural resource, in water]: 1.79659e-13 m3
- Water, river [natural resource, in water]: 1.607e-7 m3
- Water, well, in ground [natural resource, in water]: 1.93257e-7 m3

## Emissions to nature
- Acetaldehyde [air, unspecified]: 6.49986e-12 kg
- Acetic acid [air, unspecified]: 2.36121e-10 kg
- Acetone [air, unspecified]: 3.86042e-12 kg
- Ammonia [air, unspecified]: 3.96166e-11 kg
- Arsenic ion [air, unspecified]: 1.01449e-12 kg
- Benzene [air, unspecified]: 6.19587e-10 kg
- Benzene, ethyl- [air, unspecified]: 5.74549e-13 kg
- Benzene, hexachloro- [air, unspecified]: 1.37892e-19 kg
- Benzo(a)pyrene [air, unspecified]: 2.64319e-14 kg
- Bromine [air, unspecified]: 1.39669e-12 kg
- Butane [air, unspecified]: 1.04291e-9 kg
- Cadmium II [air, unspecified]: 5.46717e-14 kg
- Calcium [air, unspecified]: 1.47776e-10 kg
- Carbon dioxide, fossil [air, unspecified]: 8.74305e-5 kg
- Carbon dioxide, fossil [air, urban air close to ground]: 4.45918e-7 kg
- Carbon dioxide, non-fossil [air, unspecified]: 2.04923e-6 kg
- Carbon monoxide, fossil [air, unspecified]: 5.22318e-9 kg
- Carbon monoxide, non-fossil [air, unspecified]: 5.74549e-9 kg
- Chlorine [air, unspecified]: 3.4473e-12 kg
- Chromium III [air, unspecified]: 7.90877e-13 kg
- Chromium VI [air, unspecified]: 7.46594e-14 kg
- Cobalt II [air, unspecified]: 9.31823e-13 kg
- Copper ion [air, unspecified]: 3.03255e-11 kg
- Dinitrogen monoxide [air, unspecified]: 2.62782e-10 kg
- Dioxins, measured as 2,3,7,8-tetrachlorodibenzo-p-dioxin [air, unspecified]: 1.19045e-18 kg
- Ethanol [air, unspecified]: 7.72083e-12 kg
- Fluorine [air, unspecified]: 9.57582e-13 kg
- Formaldehyde [air, unspecified]: 2.00641e-10 kg
- Hydrocarbons, aliphatic, alkanes, unspecified [air, unspecified]: 6.58545e-11 kg
- Hydrocarbons, aliphatic, unsaturated [air, unspecified]: 7.32009e-11 kg
- Hydrocarbons, aromatic [air, unspecified]: 5.1058e-12 kg
- Hydrochloric acid [air, unspecified]: 1.09872e-9 kg
- Hydrogen fluoride [air, unspecified]: 3.45169e-11 kg
- Iron ion [air, unspecified]: 1.36543e-10 kg
- Lead II [air, unspecified]: 6.19023e-12 kg
- Magnesium [air, unspecified]: 1.0588e-10 kg
- Manganese II [air, unspecified]: 3.83297e-12 kg
- Mercury II [air, unspecified]: 1.48672e-13 kg
- Methane, fossil [air, unspecified]: 3.32228e-9 kg
- Methane, non-fossil [air, unspecified]: 5.74549e-11 kg
- Methanol [air, unspecified]: 1.31254e-11 kg
- Molybdenum VI [air, unspecified]: 3.29686e-13 kg
- NMVOC, non-methane volatile organic compounds [air, non-urban air or from high stacks]: 0.000883184 kg
- NMVOC, non-methane volatile organic compounds [air, unspecified]: 1.60878e-8 kg
- Nickel II [air, unspecified]: 1.32218e-11 kg
- Nitrogen oxides [air, unspecified]: 3.48212e-8 kg
- PAH, polycyclic aromatic hydrocarbons [air, unspecified]: 1.49635e-11 kg
- Particulate Matter, < 2.5 um [air, non-urban air or from high stacks]: 5.72353e-8 kg
- Particulate Matter, < 2.5 um [air, unspecified]: 1.74106e-9 kg
- Particulate Matter, > 10 um [air, non-urban air or from high stacks]: 2.17386e-6 kg
- Particulate Matter, > 10 um [air, unspecified]: 5.22318e-10 kg
- Particulate Matter, > 2.5 um and < 10um [air, non-urban air or from high stacks]: 6.94353e-7 kg
- Particulate Matter, > 2.5 um and < 10um [air, unspecified]: 6.96982e-10 kg
- Pentane [air, unspecified]: 1.77415e-9 kg
- Phenol, pentachloro- [air, unspecified]: 1.55128e-16 kg
- Potassium I [air, unspecified]: 4.81056e-10 kg
- Propane [air, unspecified]: 3.21963e-10 kg
- Propionic acid [air, unspecified]: 2.94239e-11 kg
- Selenium IV [air, unspecified]: 5.56427e-13 kg
- Sodium [air, unspecified]: 6.07054e-11 kg
- Sulfur dioxide [air, unspecified]: 2.60002e-8 kg
- Sulfur oxides [air, unspecified]: 2.61159e-8 kg
- Toluene [air, unspecified]: 3.04614e-10 kg
- Vanadium V [air, unspecified]: 2.6726e-11 kg
- Water [air, unspecified]: 4.86278e-7 m3
- Zinc II [air, unspecified]: 3.63024e-11 kg
- m-Xylene [air, unspecified]: 2.2982e-12 kg
- Hydrocarbons, unspecified [soil, unspecified]: 6.27594e-5 kg
- BOD5, Biological Oxygen Demand [water, unspecified]: 5.22318e-9 kg
- COD, Chemical Oxygen Demand [water, unspecified]: 1.74106e-8 kg
- DOC, Dissolved Organic Carbon [water, unspecified]: 6.44836e-9 kg
- Hydrocarbons, unspecified [water, unspecified]: 6.27594e-5 kg
- Nitrogen [water, unspecified]: 6.44192e-9 kg
- Phosphorus [water, unspecified]: 6.44192e-9 kg
- Solids, inorganic [water, unspecified]: 0.000104375 kg
- TOC, Total Organic Carbon [water, unspecified]: 6.44836e-9 kg
- Water [water, unspecified]: 3.55176e-7 m3

## Sampling procedure
The 2 Swiss HWI plants, used as the inventory reference technology mix, have a total annual capacity of 53'000 tons of hazardous waste. This corresponds to 39% of the Swiss total installed capacity in 2000. Swiss average plants size is 20'000 t/a.

## Extrapolations
Available waste composition data. Transfer coefficients from one modern HWI completed with data from MSWI. Waste-specific auxiliary material consumption adapted from MSWI.
