# treatment of sludge from pulp and paper production, sanitary landfill

Dataset: EcoSpold 2, unit process
Geography: RoW
Time period: 1994-01-01 to 2022-12-31
Technology level: current
Classification: EcoSpold01Categories: waste management/sanitary landfill
Classification: ISIC rev.4 ecoinvent: 3821:Treatment and disposal of non-hazardous waste
Synonyms: wastewater treatment sludge form pulp and paper production
Tags: Treatment; ConvertedDataset
Scenario: Business-as-Usual
System model: Allocation at the point of substitution
Generated by: Gabor Doka (obsolete)
Published in: Doka G. 2007
Database: ecoinvent
isCopyrightProtected: true

## General comment
Inventoried waste contains 100% sludge from pulp and paper production; .
waste composition (wet, in ppm): upper heating value 5.032 MJ/kg; lower heating value 2.645 MJ/kg; H2O 250000; O 427890; H 29257; C 157500; S 3367; N 26559; P 12074; B n.a.; Cl 0.025838; Br n.a.; F 1.9261; I n.a.; Ag n.a.; As 1.4625; Ba n.a.; Cd 0.255; Co 4.7786; Cr 12.75; Cu 84.585; Hg 0.18; Mn 156.56; Mo 2.8282; Ni 8.925; Pb 46.95; Sb n.a.; Se n.a.; Sn 11.862; V n.a.; Zn 131.5; Be n.a.; Sc n.a.; Sr n.a.; Ti n.a.; Tl n.a.; W n.a.; Si 17626; Fe 20951; Ca 29909; Al 5851.4; K 2344.6; Mg 3357.9; Na 12849;
Share of carbon in waste that is biogenic 100%.
Overall degradability of waste during 100 years: 60%.
[This dataset was already contained in the ecoinvent database version 2. It was not individually updated during the transfer to ecoinvent version 3. Life Cycle Impact Assessment results may still have changed, as they are affected by changes in the supply chain, i.e. in other datasets. This dataset was generated following the ecoinvent quality guidelines for version 2. It may have been subject to central changes described in the ecoinvent version 3 change report (http://www.ecoinvent.org/database/ecoinvent-version-3/reports-of-changes/), and the results of the central updates were reviewed extensively. The changes added e.g. consistent water flows and other information throughout the database. The documentation of this dataset can be found in the ecoinvent reports of version 2, which are still available via the ecoinvent website. The change report linked above covers all central changes that were made during the conversion process.]

## Included activities end
Waste-specific short-term emissions to air via landfill gas incineration and landfill leachate. Burdens from treatment of short-term leachate (0-100a) in wastewater treatment plant (including WWTP sludge disposal in municipal incinerator). Long-term emissions from landfill to groundwater (after base lining failure).

## Geography
Technology encountered in Switzerland in 2000. Landfill includes base seal, leachate collection system, treatment of leachate in municipal wastewater treatment plant.

## Technology
Swiss municipal sanitary landfill for biogenic or untreated municipal waste ('reactive organic landfill'). Landfill gas and leachate collection system. Recultivation and monitoring for 150 years after closure.

## Reference product
- sludge from pulp and paper production: -1 kg; By-product classification Waste; CPC 39920: Sewage sludge
  EcoSpold01Location=CH
  production volume 4.5082e9 kg
    Calculated. The global prodcution of paper and pulp has been derived from FAO (2013) "Pulp and paper capacities (link: http://www.fao.org/docrep/018/i3353t/i3353t.pdf, accessed 20150930). Sludge from paper and pulp production is calculated as the average between 40 and 50 kg of dry mass per tonnes of paper from Hagelqvist (2013) "Sludge from pulp and paper mills for biogas prodcution) (link : http://www.diva-portal.org/smash/get/diva2:603009/FULLTEXT01.pdf&sa=U&ei=T0FOU4byPMfOsgar5YGgCQ&ved=0CB0QFjAA&usg=AFQjCNEX-zId539_0tE-9pE_R9JMV9eINg, accessed 20150930). Of the total sludge 20% is assumed to go to landfill (from: Series on Emission Scenario Documents Pulp, Paper and Board Industry, OECD 2009. Link: https://books.google.ch/books?id=0pRsBAAAQBAJ&pg=PA51&lpg=PA51&dq=paper+sludge+landfill+agriculture&source=bl&ots=V2IWi69XjP&sig=CgziYiNJDLjP6FYiKKXxOLHE7Ow&hl=de&sa=X&ved=0CFYQ6AEwB2oVChMI0ejH3KeeyAIVxe0UCh2TLAr9#v=onepage&q=paper%20sludge%20landfill%20agriculture&f=false, accessed 20150930)
  property carbon content, non-fossil 0.21
    Tab 6.21, ecoinvent v2.2 report 11_III & Tab A.9, ecoinvent v2.2 report 13_I. Sludge from pulp and paper contains 15.75% carbon
  property heating value, net 2.65 MJ
    Value taken from the general comment of the treatment dataset.
  property price 0 EUR2005
    Waste products are assigned a price of zero as they are assumed to require further treatment.
  properties: carbon allocation 0.1575 kg, carbon content 0.21, carbon content, fossil 0, dry mass 0.75 kg, water content 0.333333, water in wet mass 0.25 kg, wet mass 1 kg

## Inputs from technosphere
- aluminium sulfate, powder: 0.000519 kg; lognormal variance with pedigree 0.75, pedigree (5,5,5,5,5)
  EcoSpold01Location=RER
  burden from wastewater treatment of the short-term leachate (0-100a). Uncertainty calculated from unertainty of the waste composition of this waste, uncertainty in waste decomposition and short-term leaching in sanitary landfill
  Uncertainty: . Uncertainty calculated from unertainty of the waste composition of this waste, uncertainty in waste decomposition and short-term leaching in sanitary landfill
  properties: dry mass 1 kg, wet mass 1 kg
- ammonia, anhydrous, liquid: 2.03519e-6, 2.1331e-7, 2.07729e-6, 7.83953e-6, 1.04842e-6, 9.53574e-7, 2.25588e-5, 6.73901e-7 kg (8 suppliers, which the file names only by identifier); sum of these 3.74e-5 kg; lognormal variance with pedigree 0.292, pedigree (1,1,5,5,1)
  EcoSpold01Location=CH
  burden from incineration of sludge from wastewater treatment of the short-term leachate (0-100a). uncertainty is calculated from uncertainties in waste composition and transfer coefficients in incinerator and uncertainty of waste decomposition and short-term leaching in sanitary landfill
  properties: dry mass 1 kg, wet mass 1 kg
- cement, unspecified: 0.00018751, 7.03526e-7, 4.60174e-7, 1.86197e-5, 4.90281e-6, 5.84451e-7, 2.31534e-7, 2.98779e-6 kg (8 suppliers, which the file names only by identifier); sum of these 0.000216 kg; lognormal variance with pedigree 0.332, pedigree (1,1,5,5,1)
  (same comment as for ammonia, anhydrous, liquid)
  properties: dry mass 1 kg, wet mass 1 kg
- chemical, inorganic: 4.43e-8 kg; lognormal variance with pedigree 0.492, pedigree (1,1,5,5,1)
  EcoSpold01Location=GLO
  burden from incineration of sludge from wastewater treatment of the short-term leachate (0-100a). uncertainty is calculated from uncertainties in waste composition and transfer coefficients in incinerator and uncertainty of waste decomposition and short-term leaching in sanitary landfill
  properties: carbon content, fossil 0.003, dry mass 1 kg, wet mass 1 kg
  note on carbon content, fossil: This dataset is an unweighted average of 20 inorganic substances (listed in Tab 88.1, ecoinvent v2.2 report 8, part II), being part of the top100 chemicals included in this database. The C-content has also been calculated as an unweighted average of the C content of the substances composing this dataset.
- chemical, organic: 5.7e-8 kg; lognormal variance with pedigree 1.512, pedigree (1,1,5,5,1)
  burden from incineration of sludge from wastewater treatment of the short-term leachate (0-100a). uncertainty is calculated from uncertainties in waste composition and transfer coefficients in incinerator and uncertainty of waste decomposition and short-term leaching in sanitary landfill
  EcoSpold01Location=GLO
  properties: carbon content, fossil 0.628, dry mass 1 kg, heating value, net 19.03 MJ, wet mass 1 kg
  note on carbon content, fossil: This dataset is an unweighted average of 20 organic substances (listed in Tab 88.1, ecoinvent v2.2 report 8, part II), being part of the top100 chemicals included in this database. The C-content has also been calculated as an unweighted average of the C content of the substances composing this dataset.
- chromium oxide, flakes: 2.18e-8 kg; lognormal variance with pedigree 0.62, pedigree (5,5,5,5,5)
  burden from incineration of sludge from wastewater treatment of the short-term leachate (0-100a). Proxy for vanadium pentoxide V2O5 in SCR catalyst, uncertainty calculated from uncertainty in average DeNOx input, uncertainty in the share of thermal NOx, uncertainty of nitrogen content in average municipal waste and the unertainty in nitrogen content in *this* waste and uncertainty of waste decomposition and short-term leaching in sanitary landfill
  EcoSpold01Location=RER
  Uncertainty: . Proxy for vanadium pentoxide V2O5 in SCR catalyst, uncertainty calculated from uncertainty in average DeNOx input, uncertainty in the share of thermal NOx, uncertainty of nitrogen content in average municipal waste and the unertainty in nitrogen content in *this* waste and uncertainty of waste decomposition and short-term leaching in sanitary landfill
  properties: dry mass 1 kg, wet mass 1 kg
- electricity, high voltage: 3.7875e-6, 0.00116751, 6.44756e-5, 1.93476e-5, 0.000128728, 0.00040615 kWh (6 suppliers, which the file names only by identifier); sum of these 0.00179 kWh; lognormal variance with pedigree 0.402, pedigree (1,1,5,5,1)
  (same comment as for ammonia, anhydrous, liquid)
- electricity, low voltage: 0.00437998, 0.00868011, 0.0833816, 0.0014874, 0.0298004, 0.000270491 kWh (6 suppliers, which the file names only by identifier); sum of these 0.128 kWh; lognormal variance with pedigree 0.3, pedigree (5,5,5,5,5)
  EcoSpold01Location=CH
  burden from wastewater treatment of the short-term leachate (0-100a). Uncertainty calculated from unertainty of the waste composition of this waste, uncertainty in waste decomposition and short-term leaching in sanitary landfill
  Uncertainty: . Uncertainty calculated from unertainty of the waste composition of this waste, uncertainty in waste decomposition and short-term leaching in sanitary landfill
- heat, central or small-scale, other than natural gas: 0.0046624 MJ; lognormal variance with pedigree 0.33, pedigree (5,5,5,5,5)
  (same comment as for electricity, low voltage)
  properties: heating value, net 1 MJ
- heat, district or industrial, natural gas: 0.00954161, 0.000156793 MJ (2 suppliers, which the file names only by identifier); sum of these 0.0096984 MJ; lognormal variance with pedigree 0.33, pedigree (5,5,5,5,5)
  (same comment as for aluminium sulfate, powder)
  properties: heating value, net 1 MJ
- heat, district or industrial, other than natural gas: 0.0103952, 4.8159e-6 MJ (2 suppliers, which the file names only by identifier); sum of these 0.0104 MJ; lognormal variance with pedigree 0.212, pedigree (1,1,5,5,1)
  burden from incineration of sludge from wastewater treatment of the short-term leachate (0-100a). uncertainty is calculated from uncertainties in waste composition and transfer coefficients in incinerator and uncertainty of waste decomposition and short-term leaching in sanitary landfill
  EcoSpold01Location=CH
  properties: heating value, net 1 MJ
- hydrochloric acid, without water, in 30% solution state: 2.66e-8 kg; lognormal variance with pedigree 0.492, pedigree (1,1,5,5,1)
  burden from incineration of sludge from wastewater treatment of the short-term leachate (0-100a). uncertainty is calculated from uncertainties in waste composition and transfer coefficients in incinerator and uncertainty of waste decomposition and short-term leaching in sanitary landfill
  EcoSpold01Location=RER
  properties: dry mass 1 kg, heating value, net 3.32 MJ, wet mass 1 kg
- iron (III) chloride, without water, in 40% solution state: 0.00263 kg; lognormal variance with pedigree 0.632, pedigree (1,1,5,5,1)
  (same comment as for heat, district or industrial, other than natural gas)
  properties: dry mass 1 kg, wet mass 1 kg
- iron sulfate: 0.00192 kg; lognormal variance with pedigree 0.75, pedigree (5,5,5,5,5)
  burden from wastewater treatment of the short-term leachate (0-100a). Uncertainty calculated from unertainty of the waste composition of this waste, uncertainty in waste decomposition and short-term leaching in sanitary landfill
  EcoSpold01Location=RER
  Uncertainty: . Uncertainty calculated from unertainty of the waste composition of this waste, uncertainty in waste decomposition and short-term leaching in sanitary landfill
  properties: dry mass 1 kg, wet mass 1 kg
- municipal waste incineration facility: 3.11e-12 unit; lognormal variance with pedigree 0.212, pedigree (1,1,5,5,1)
  EcoSpold01Location=CH
  Burden from incineration of sludge from wastewater treatment of the short-term leachate (0-100a).
- process-specific burdens, municipal waste incineration: 0.0124 kg; lognormal variance with pedigree 0.212, pedigree (1,1,5,5,1)
  Burden from incineration of sludge from wastewater treatment of the short-term leachate (0-100a).
  EcoSpold01Location=CH
- process-specific burdens, residual material landfill: 0.00054 kg; lognormal variance with pedigree 0.332, pedigree (1,1,5,5,1)
  (same comment as for heat, district or industrial, other than natural gas)
- process-specific burdens, sanitary landfill: 1 kg; lognormal variance with pedigree 0.042, pedigree (1,1,5,5,1)
  demands per kilogram waste. uncertainty is heeded in the module
  EcoSpold01Location=CH
- process-specific burdens, slag landfill: 0.00459 kg; lognormal variance with pedigree 0.332, pedigree (1,1,5,5,1)
  (same comment as for ammonia, anhydrous, liquid)
- quicklime, milled, packed: 4.53e-7 kg; lognormal variance with pedigree 0.202, pedigree (1,1,5,5,1)
  (same comment as for ammonia, anhydrous, liquid)
  properties: dry mass 0.99 kg, water content 0.010101, wet mass 1 kg
- residual material landfill: 1.13e-12 unit; lognormal variance with pedigree 0.332, pedigree (1,1,5,5,1)
  (same comment as for ammonia, anhydrous, liquid)
- sanitary landfill facility: 5.56e-10 unit; lognormal variance with pedigree 0.042, pedigree (1,1,5,5,1)
  EcoSpold01Location=CH
  demands per kilogram waste. uncertainty is heeded in the module
- sewer grid, 5E9l/year, 110 km: 5.45e-10 km; lognormal variance with pedigree 0.2106, pedigree (5,5,5,5,5)
  (same comment as for electricity, low voltage)
- slag landfill: 8.15e-12 unit; lognormal variance with pedigree 0.332, pedigree (1,1,5,5,1)
  (same comment as for heat, district or industrial, other than natural gas)
- sodium hydroxide, without water, in 50% solution state: 2.5e-6 kg; lognormal variance with pedigree 0.202, pedigree (1,1,5,5,1)
  EcoSpold01Location=RER
  burden from incineration of sludge from wastewater treatment of the short-term leachate (0-100a). uncertainty is calculated from uncertainties in waste composition and transfer coefficients in incinerator and uncertainty of waste decomposition and short-term leaching in sanitary landfill
  properties: dry mass 1 kg, heating value, net 3.03 MJ, wet mass 1 kg
- titanium dioxide: 1.07e-6 kg; lognormal variance with pedigree 0.512, pedigree (1,1,5,5,1)
  (same comment as for hydrochloric acid, without water, in 30% solution state)
  properties: dry mass 1 kg, wet mass 1 kg
- waste cement, hydrated: -0.00054 kg; name BP_amount_2; lognormal variance with pedigree 0.292, pedigree (1,1,1,5,1)
  (same comment as for ammonia, anhydrous, liquid)
  production volume
    Calculated from the production volume of sludge from pulp and paper production, 25% water in proportion to the respective output amounts.
  properties: dry mass 1 kg, wet mass 1 kg
- waste graphical paper: -1.04702e-6, -2.89758e-7, -2.53367e-8, -1.02093e-7, -3.52493e-5, -1.89751e-6, -1.88985e-7 kg (7 suppliers, which the file names only by identifier); sum of these -3.88e-5 kg; lognormal variance with pedigree 0.2106, pedigree (5,5,5,5,5)
  burden from wastewater treatment of the short-term leachate (0-100a). Uncertainty calculated from unertainty of the waste composition of this waste, uncertainty in waste decomposition and short-term leaching in sanitary landfill
  EcoSpold01Location=CH
  Uncertainty: . Uncertainty calculated from unertainty of the waste composition of this waste, uncertainty in waste decomposition and short-term leaching in sanitary landfill
  production volume
    (same comment as for waste cement, hydrated)
  properties: carbon content, non-fossil 0.454955, dry mass 0.888 kg, heating value, net 14.12 MJ, water content 0.126126, wet mass 1 kg
  note on heating value, net: Value taken from the general comment of the treatment dataset.
- waste plastic, mixture: -4.76812e-6, -2.40943e-8, -5.31601e-8, -3.33795e-5, -3.18588e-7, -1.24955e-7, -1.31588e-7 kg (7 suppliers, which the file names only by identifier); sum of these -3.88e-5 kg; lognormal variance with pedigree 0.2106, pedigree (5,5,5,5,5)
  (same comment as for waste graphical paper)
  production volume
    (same comment as for waste cement, hydrated)
  properties: carbon content, fossil 0.747344, dry mass 0.847 kg, heating value, net 30.79 MJ, water content 0.180638, wet mass 1 kg
  note on carbon content, fossil: C content in 1 kg DM was calculated using data in Tab A.2, ecoinvent v2.2 report 13_I
- wastewater treatment facility, capacity 5E9l/year: 1.42e-11 unit; lognormal variance with pedigree 0.2106, pedigree (5,5,5,5,5)
  (same comment as for waste graphical paper)

## Emissions to nature
- Aluminium III [air, non-urban air or from high stacks]: 4.39e-8 kg; lognormal variance with pedigree 1.772, pedigree (1,1,5,5,1)
  burden from direct release or incineration of landfill biogas. Uncertainty calculated from unertainty of the waste composition of this waste, uncertainty in waste decomposition and short-term leaching in sanitary landfill
- Aluminium III [air, urban air close to ground]: 3.86e-7 kg; lognormal variance with pedigree 0.492, pedigree (1,1,5,5,1)
  Emissions from short-term leachate treatment and incineration of resulting sludge. Uncertainty calculated depending on waste input and uncertainty of transfer coefficents in landfill, wastewater treatment and incineration model.
- Ammonia [air, urban air close to ground]: 2.37e-5 kg; lognormal variance with pedigree 0.222, pedigree (1,1,5,5,1)
  (same comment as for Aluminium III)
- Arsenic ion [air, non-urban air or from high stacks]: 2.21e-9 kg; lognormal variance with pedigree 2.162, pedigree (1,1,5,5,1)
  (same comment as for Aluminium III)
- Arsenic ion [air, urban air close to ground]: 4.44e-11 kg; lognormal variance with pedigree 1.712, pedigree (1,1,5,5,1)
  (same comment as for Aluminium III)
- Cadmium II [air, non-urban air or from high stacks]: 1.79e-10 kg; lognormal variance with pedigree 2.482, pedigree (1,1,5,5,1)
  (same comment as for Aluminium III)
- Cadmium II [air, urban air close to ground]: 7.36e-13 kg; lognormal variance with pedigree 1.962, pedigree (1,1,5,5,1)
  (same comment as for Aluminium III)
- Calcium [air, non-urban air or from high stacks]: 5.84e-7 kg; lognormal variance with pedigree 1.462, pedigree (1,1,5,5,1)
  (same comment as for Aluminium III)
- Calcium [air, urban air close to ground]: 3.82e-7 kg; lognormal variance with pedigree 0.462, pedigree (1,1,5,5,1)
  (same comment as for Aluminium III)
- Carbon dioxide, non-fossil [air, non-urban air or from high stacks]: 0.237 kg; lognormal variance with pedigree 0.132, pedigree (1,1,5,5,1)
  (same comment as for Aluminium III)
- Carbon dioxide, non-fossil [air, urban air close to ground]: 0.0079 kg; lognormal variance with pedigree 0.432, pedigree (1,1,5,5,1)
  (same comment as for Aluminium III)
- Carbon monoxide, non-fossil [air, non-urban air or from high stacks]: 1.34e-5 kg; lognormal variance with pedigree 0.782, pedigree (1,1,5,5,1)
  (same comment as for Aluminium III)
- Carbon monoxide, non-fossil [air, urban air close to ground]: 7.48e-6 kg; lognormal variance with pedigree 0.322, pedigree (1,1,5,5,1)
  (same comment as for Aluminium III)
- Chromium III [air, non-urban air or from high stacks]: 2.18e-11 kg; lognormal variance with pedigree 2.772, pedigree (1,1,5,5,1)
  (same comment as for Aluminium III)
- Chromium III [air, urban air close to ground]: 3.18e-15 kg; lognormal variance with pedigree 1.802, pedigree (1,1,5,5,1)
  (same comment as for Aluminium III)
- Cobalt II [air, non-urban air or from high stacks]: 2.3e-10 kg; lognormal variance with pedigree 2.462, pedigree (1,1,5,5,1)
  (same comment as for Aluminium III)
- Cobalt II [air, urban air close to ground]: 1.44e-14 kg; lognormal variance with pedigree 1.592, pedigree (1,1,5,5,1)
  (same comment as for Aluminium III)
- Copper ion [air, non-urban air or from high stacks]: 7.1e-11 kg; lognormal variance with pedigree 2.602, pedigree (1,1,5,5,1)
  (same comment as for Aluminium III)
- Copper ion [air, urban air close to ground]: 1.36e-12 kg; lognormal variance with pedigree 1.612, pedigree (1,1,5,5,1)
  (same comment as for Aluminium III)
- Cyanide [air, urban air close to ground]: 6.66e-7 kg; lognormal variance with pedigree 0.302, pedigree (1,1,5,5,1)
  (same comment as for Aluminium III)
- Dinitrogen monoxide [air, urban air close to ground]: 6.54e-5 kg; lognormal variance with pedigree 0.182, pedigree (1,1,5,5,1)
  (same comment as for Aluminium III)
- Hydrochloric acid [air, non-urban air or from high stacks]: 3.67e-10 kg; lognormal variance with pedigree 2.292, pedigree (1,1,5,5,1)
  (same comment as for Aluminium III)
- Hydrogen fluoride [air, non-urban air or from high stacks]: 4.61e-7 kg; lognormal variance with pedigree 1.582, pedigree (1,1,5,5,1)
  (same comment as for Aluminium III)
- Iron ion [air, non-urban air or from high stacks]: 4.32e-8 kg; lognormal variance with pedigree 1.792, pedigree (1,1,5,5,1)
  (same comment as for Aluminium III)
- Iron ion [air, urban air close to ground]: 5.66e-8 kg; lognormal variance with pedigree 0.622, pedigree (1,1,5,5,1)
  (same comment as for Aluminium III)
- Lead II [air, non-urban air or from high stacks]: 5.53e-11 kg; lognormal variance with pedigree 2.642, pedigree (1,1,5,5,1)
  (same comment as for Aluminium III)
- Lead II [air, urban air close to ground]: 5.49e-12 kg; lognormal variance with pedigree 1.652, pedigree (1,1,5,5,1)
  (same comment as for Aluminium III)
- Magnesium [air, non-urban air or from high stacks]: 3.11e-7 kg; lognormal variance with pedigree 1.512, pedigree (1,1,5,5,1)
  (same comment as for Aluminium III)
- Magnesium [air, urban air close to ground]: 1.68e-7 kg; lognormal variance with pedigree 0.602, pedigree (1,1,5,5,1)
  (same comment as for Aluminium III)
- Manganese II [air, non-urban air or from high stacks]: 2.69e-8 kg; lognormal variance with pedigree 1.832, pedigree (1,1,5,5,1)
  (same comment as for Aluminium III)
- Manganese II [air, urban air close to ground]: 2.88e-13 kg; lognormal variance with pedigree 1.092, pedigree (1,1,5,5,1)
  (same comment as for Aluminium III)
- Mercury II [air, non-urban air or from high stacks]: 2.96e-9 kg; lognormal variance with pedigree 2.142, pedigree (1,1,5,5,1)
  (same comment as for Aluminium III)
- Mercury II [air, urban air close to ground]: 1.25e-14 kg; lognormal variance with pedigree 2.092, pedigree (1,1,5,5,1)
  (same comment as for Aluminium III)
- Methane, non-fossil [air, non-urban air or from high stacks]: 0.0363 kg; lognormal variance with pedigree 0.182, pedigree (1,1,5,5,1)
  (same comment as for Aluminium III)
- Methane, non-fossil [air, urban air close to ground]: 1.55e-5 kg; lognormal variance with pedigree 0.472, pedigree (1,1,5,5,1)
  (same comment as for Aluminium III)
- Molybdenum VI [air, non-urban air or from high stacks]: 4.47e-11 kg; lognormal variance with pedigree 2.672, pedigree (1,1,5,5,1)
  (same comment as for Aluminium III)
- Molybdenum VI [air, urban air close to ground]: 1.76e-10 kg; lognormal variance with pedigree 1.672, pedigree (1,1,5,5,1)
  (same comment as for Aluminium III)
- NMVOC, non-methane volatile organic compounds [air, non-urban air or from high stacks]: 2.54e-7 kg; lognormal variance with pedigree 0.182, pedigree (1,1,5,5,1)
  (same comment as for Aluminium III)
- NMVOC, non-methane volatile organic compounds [air, urban air close to ground]: 7.03e-8 kg; lognormal variance with pedigree 0.592, pedigree (1,1,5,5,1)
  (same comment as for Aluminium III)
- Nickel II [air, non-urban air or from high stacks]: 7.78e-11 kg; lognormal variance with pedigree 2.602, pedigree (1,1,5,5,1)
  (same comment as for Aluminium III)
- Nickel II [air, urban air close to ground]: 5.29e-15 kg; lognormal variance with pedigree 1.662, pedigree (1,1,5,5,1)
  (same comment as for Aluminium III)
- Nitrogen oxides [air, non-urban air or from high stacks]: 6.85e-6 kg; lognormal variance with pedigree 0.502, pedigree (1,1,5,5,1)
  (same comment as for Aluminium III)
- Nitrogen oxides [air, urban air close to ground]: 0.000232 kg; lognormal variance with pedigree 0.212, pedigree (1,1,5,5,1)
  (same comment as for Aluminium III)
- Particulate Matter, < 2.5 um [air, non-urban air or from high stacks]: 4.5e-6 kg; lognormal variance with pedigree 0.442, pedigree (1,1,5,5,1)
  (same comment as for Aluminium III)
- Phosphorus [air, urban air close to ground]: 2.57e-7 kg; lognormal variance with pedigree 0.652, pedigree (1,1,5,5,1)
  (same comment as for Aluminium III)
- Potassium I [air, non-urban air or from high stacks]: 2.57e-7 kg; lognormal variance with pedigree 1.532, pedigree (1,1,5,5,1)
  (same comment as for Aluminium III)
- Silicon [air, non-urban air or from high stacks]: 1.32e-7 kg; lognormal variance with pedigree 1.632, pedigree (1,1,5,5,1)
  (same comment as for Aluminium III)
- Silicon [air, urban air close to ground]: 1.16e-6 kg; lognormal variance with pedigree 0.622, pedigree (1,1,5,5,1)
  (same comment as for Aluminium III)
- Sodium [air, non-urban air or from high stacks]: 3.21e-6 kg; lognormal variance with pedigree 1.212, pedigree (1,1,5,5,1)
  (same comment as for Aluminium III)
- Sulfur dioxide [air, non-urban air or from high stacks]: 0.000264 kg; lognormal variance with pedigree 0.752, pedigree (1,1,5,5,1)
  (same comment as for Aluminium III)
- Tin ion [air, non-urban air or from high stacks]: 1.05e-11 kg; lognormal variance with pedigree 2.862, pedigree (1,1,5,5,1)
  (same comment as for Aluminium III)
- Tin ion [air, urban air close to ground]: 3.24e-11 kg; lognormal variance with pedigree 1.822, pedigree (1,1,5,5,1)
  (same comment as for Aluminium III)
- Zinc II [air, non-urban air or from high stacks]: 8.31e-10 kg; lognormal variance with pedigree 2.282, pedigree (1,1,5,5,1)
  (same comment as for Aluminium III)
- Zinc II [air, urban air close to ground]: 4.22e-11 kg; lognormal variance with pedigree 1.282, pedigree (1,1,5,5,1)
  (same comment as for Aluminium III)
- Aluminium III [water, ground-, long-term]: 0.00586 kg; lognormal variance with pedigree 0.452, pedigree (1,1,5,5,1)
  Emissions from long-term leachate (>100a) directly from MSW landfill and indirectly via incineration of treatement sludge from leachate treatement. Uncertainty calculated depending on waste input and uncertainty of long-term transfer coefficents in landfill.
- Aluminium III [water, surface water]: 1.05e-5 kg; lognormal variance with pedigree 0.722, pedigree (1,1,5,5,1)
  (same comment as for Aluminium III)
- Ammonium [water, ground-, long-term]: 1.08e-11 kg; lognormal variance with pedigree 2.222, pedigree (1,1,5,5,1)
  (same comment as for Aluminium III)
- Ammonium [water, surface water]: 0.0129 kg; lognormal variance with pedigree 0.212, pedigree (1,1,5,5,1)
  (same comment as for Aluminium III)
- Arsenic ion [water, ground-, long-term]: 1.32e-6 kg; lognormal variance with pedigree 1.542, pedigree (1,1,5,5,1)
  (same comment as for Aluminium III)
- Arsenic ion [water, surface water]: 1.39e-7 kg; lognormal variance with pedigree 1.672, pedigree (1,1,5,5,1)
  (same comment as for Aluminium III)
- BOD5, Biological Oxygen Demand [water, ground-, long-term]: 0.00419 kg; lognormal variance with pedigree 0.772, pedigree (1,1,5,5,1)
  (same comment as for Aluminium III)
- BOD5, Biological Oxygen Demand [water, surface water]: 0.000546 kg; lognormal variance with pedigree 0.432, pedigree (1,1,5,5,1)
  (same comment as for Aluminium III)
- COD, Chemical Oxygen Demand [water, ground-, long-term]: 0.0177 kg; lognormal variance with pedigree 0.772, pedigree (1,1,5,5,1)
  (same comment as for Aluminium III)
- COD, Chemical Oxygen Demand [water, surface water]: 0.00174 kg; lognormal variance with pedigree 0.432, pedigree (1,1,5,5,1)
  (same comment as for Aluminium III)
- Cadmium II [water, ground-, long-term]: 2.28e-7 kg; lognormal variance with pedigree 1.862, pedigree (1,1,5,5,1)
  (same comment as for Aluminium III)
- Cadmium II [water, surface water]: 1.37e-8 kg; lognormal variance with pedigree 1.902, pedigree (1,1,5,5,1)
  (same comment as for Aluminium III)
- Calcium II [water, ground-, long-term]: 0.0278 kg; lognormal variance with pedigree 0.282, pedigree (1,1,5,5,1)
  (same comment as for Aluminium III)
- Calcium II [water, surface water]: 0.00211 kg; lognormal variance with pedigree 0.432, pedigree (1,1,5,5,1)
  (same comment as for Aluminium III)
- Chloride [water, ground-, long-term]: 2.58e-17 kg; lognormal variance with pedigree 3.892, pedigree (1,1,5,5,1)
  (same comment as for Aluminium III)
- Chloride [water, surface water]: 0.00172 kg; lognormal variance with pedigree 0.632, pedigree (1,1,5,5,1)
  Emissions from short-term leachate treatment. Uncertainty calculated depending on waste input and uncertainty of transfer coefficents in landfill and wastewater treatment.
- Chromium III [water, surface water]: 1.37e-10 kg; lognormal variance with pedigree 1.722, pedigree (1,1,5,5,1)
  (same comment as for Aluminium III)
- Chromium VI [water, ground-, long-term]: 6.19e-8 kg; lognormal variance with pedigree 8.572, pedigree (1,1,5,5,1)
  (same comment as for Aluminium III)
- Chromium VI [water, surface water]: 4.57e-8 kg; lognormal variance with pedigree 1.682, pedigree (1,1,5,5,1)
  (same comment as for Aluminium III)
- Cobalt II [water, ground-, long-term]: 4.25e-6 kg; lognormal variance with pedigree 1.272, pedigree (1,1,5,5,1)
  (same comment as for Aluminium III)
- Cobalt II [water, surface water]: 4.68e-7 kg; lognormal variance with pedigree 1.482, pedigree (1,1,5,5,1)
  (same comment as for Aluminium III)
- Copper ion [water, ground-, long-term]: 8.45e-5 kg; lognormal variance with pedigree 1.022, pedigree (1,1,5,5,1)
  (same comment as for Aluminium III)
- Copper ion [water, surface water]: 6.45e-8 kg; lognormal variance with pedigree 1.542, pedigree (1,1,5,5,1)
  (same comment as for Aluminium III)
- DOC, Dissolved Organic Carbon [water, ground-, long-term]: 0.0162 kg; lognormal variance with pedigree 0.772, pedigree (1,1,5,5,1)
  (same comment as for Aluminium III)
- DOC, Dissolved Organic Carbon [water, surface water]: 0.000422 kg; lognormal variance with pedigree 0.432, pedigree (1,1,5,5,1)
  (same comment as for Aluminium III)
- Fluoride [water, ground-, long-term]: 1.4e-6 kg; lognormal variance with pedigree 1.532, pedigree (1,1,5,5,1)
  (same comment as for Aluminium III)
- Fluoride [water, surface water]: 8.49e-8 kg; lognormal variance with pedigree 1.722, pedigree (1,1,5,5,1)
  (same comment as for Chloride)
- Hydrogen sulfide [water, ground-, long-term]: 0.000181 kg; lognormal variance with pedigree 0.552, pedigree (1,1,5,5,1)
  (same comment as for Aluminium III)
- Iron ion [water, ground-, long-term]: 0.00225 kg; lognormal variance with pedigree 1.592, pedigree (1,1,5,5,1)
  (same comment as for Aluminium III)
- Iron ion [water, surface water]: 8.82e-5 kg; lognormal variance with pedigree 0.712, pedigree (1,1,5,5,1)
  (same comment as for Aluminium III)
- Lead II [water, ground-, long-term]: 4.68e-5 kg; lognormal variance with pedigree 1.132, pedigree (1,1,5,5,1)
  (same comment as for Aluminium III)
- Lead II [water, surface water]: 1.82e-8 kg; lognormal variance with pedigree 1.602, pedigree (1,1,5,5,1)
  (same comment as for Aluminium III)
- Magnesium [water, ground-, long-term]: 0.00223 kg; lognormal variance with pedigree 0.512, pedigree (1,1,5,5,1)
  (same comment as for Aluminium III)
- Magnesium [water, surface water]: 0.00112 kg; lognormal variance with pedigree 0.572, pedigree (1,1,5,5,1)
  (same comment as for Aluminium III)
- Manganese II [water, ground-, long-term]: 9.35e-5 kg; lognormal variance with pedigree 0.662, pedigree (1,1,5,5,1)
  (same comment as for Aluminium III)
- Manganese II [water, surface water]: 5.46e-5 kg; lognormal variance with pedigree 0.952, pedigree (1,1,5,5,1)
  (same comment as for Aluminium III)
- Mercury II [water, ground-, long-term]: 1.7e-7 kg; lognormal variance with pedigree 1.822, pedigree (1,1,5,5,1)
  (same comment as for Aluminium III)
- Mercury II [water, surface water]: 2.34e-9 kg; lognormal variance with pedigree 2.042, pedigree (1,1,5,5,1)
  (same comment as for Aluminium III)
- Molybdenum VI [water, ground-, long-term]: 1.12e-6 kg; lognormal variance with pedigree 1.602, pedigree (1,1,5,5,1)
  (same comment as for Aluminium III)
- Molybdenum VI [water, surface water]: 1.06e-7 kg; lognormal variance with pedigree 1.632, pedigree (1,1,5,5,1)
  (same comment as for Aluminium III)
- Nickel II [water, ground-, long-term]: 8.73e-6 kg; lognormal variance with pedigree 1.302, pedigree (1,1,5,5,1)
  (same comment as for Aluminium III)
- Nickel II [water, surface water]: 1.89e-7 kg; lognormal variance with pedigree 1.542, pedigree (1,1,5,5,1)
  (same comment as for Aluminium III)
- Nitrate [water, ground-, long-term]: 2.66e-5 kg; lognormal variance with pedigree 0.522, pedigree (1,1,5,5,1)
  (same comment as for Aluminium III)
- Nitrate [water, surface water]: 0.0469 kg; lognormal variance with pedigree 0.182, pedigree (1,1,5,5,1)
  (same comment as for Aluminium III)
- Nitrite [water, ground-, long-term]: 5.89e-13 kg; lognormal variance with pedigree 2.222, pedigree (1,1,5,5,1)
  (same comment as for Aluminium III)
- Nitrite [water, surface water]: 0.00027 kg; lognormal variance with pedigree 0.302, pedigree (1,1,5,5,1)
  (same comment as for Aluminium III)
- Nitrogen [water, surface water]: 0.000349 kg; lognormal variance with pedigree 0.192, pedigree (1,1,5,5,1)
  (same comment as for Aluminium III)
- Nitrogen, organic bound [water, ground-, long-term]: 1.77e-11 kg; lognormal variance with pedigree 2.222, pedigree (1,1,5,5,1)
  (same comment as for Aluminium III)
- Phosphate [water, ground-, long-term]: 0.000272 kg; lognormal variance with pedigree 6.592, pedigree (1,1,5,5,1)
  (same comment as for Aluminium III)
- Phosphate [water, surface water]: 0.000437 kg; lognormal variance with pedigree 0.612, pedigree (1,1,5,5,1)
  (same comment as for Aluminium III)
- Potassium I [water, ground-, long-term]: 0.00132 kg; lognormal variance with pedigree 0.602, pedigree (1,1,5,5,1)
  (same comment as for Aluminium III)
- Potassium I [water, surface water]: 0.00103 kg; lognormal variance with pedigree 0.612, pedigree (1,1,5,5,1)
  (same comment as for Chloride)
- Silicon [water, ground-, long-term]: 0.00037 kg; lognormal variance with pedigree 4.032, pedigree (1,1,5,5,1)
  (same comment as for Aluminium III)
- Silicon [water, surface water]: 3.18e-5 kg; lognormal variance with pedigree 0.612, pedigree (1,1,5,5,1)
  (same comment as for Aluminium III)
- Sodium I [water, ground-, long-term]: 1.28e-11 kg; lognormal variance with pedigree 2.302, pedigree (1,1,5,5,1)
  (same comment as for Aluminium III)
- Sodium I [water, surface water]: 0.0128 kg; lognormal variance with pedigree 0.382, pedigree (1,1,5,5,1)
  (same comment as for Chloride)
- Sulfate [water, ground-, long-term]: 0.00694 kg; lognormal variance with pedigree 0.552, pedigree (1,1,5,5,1)
  (same comment as for Aluminium III)
- Sulfate [water, surface water]: 0.00395 kg; lognormal variance with pedigree 0.372, pedigree (1,1,5,5,1)
  (same comment as for Chloride)
- TOC, Total Organic Carbon [water, ground-, long-term]: 0.0162 kg; lognormal variance with pedigree 0.772, pedigree (1,1,5,5,1)
  (same comment as for Aluminium III)
- TOC, Total Organic Carbon [water, surface water]: 0.000439 kg; lognormal variance with pedigree 0.432, pedigree (1,1,5,5,1)
  (same comment as for Aluminium III)
- Tin ion [water, ground-, long-term]: 1.18e-5 kg; lognormal variance with pedigree 1.282, pedigree (1,1,5,5,1)
  (same comment as for Aluminium III)
- Tin ion [water, surface water]: 1.75e-8 kg; lognormal variance with pedigree 1.782, pedigree (1,1,5,5,1)
  (same comment as for Aluminium III)
- Zinc II [water, ground-, long-term]: 0.000106 kg; lognormal variance with pedigree 0.972, pedigree (1,1,5,5,1)
  (same comment as for Aluminium III)
- Zinc II [water, surface water]: 1.16e-6 kg; lognormal variance with pedigree 1.212, pedigree (1,1,5,5,1)
  (same comment as for Aluminium III)

## Sampling procedure
Landfill model based on observed leachate concentrations in literature. Extrapolated to 60'000 years heeding chemical characteristics. Initial waste composition from various literature sources.

## Extrapolations
This dataset has been copied from an original dataset covering the geography CH. The uncertainty has been adjusted accordingly.

## Review by Niels Jungbluth 2003-08-30
Passed. Calculation for standard deviation 95 of, i.e., infrastructure,
land occupation, transport services or other services can differ from
standard Pedigree approach used in this project and figures obtained by
this procedure.
