# treatment of waste plastic, consumer electronics, unsanitary landfill, wet infiltration class (500mm)

Dataset: EcoSpold 2, unit process
Geography: GLO
Time period: 2006-01-01 to 2022-12-31
Technology level: current
Classification: ISIC rev.4 ecoinvent: 3821:Treatment and disposal of non-hazardous waste
Synonyms: municipal waste landfill
Scenario: Business-as-Usual
System model: Allocation at the point of substitution
Share of production covered: 1 %
Generated by: Avraam Symeonidis
Database: ecoinvent
isCopyrightProtected: true

## General comment
This dataset represents the activity of waste disposal of waste plastic, consumer electronics in a unsanitary landfill. Recommended use of this dataset: This waste represents the non-recycled reject flow of plastics from electronics recycling. // Waste composition (wet, in ppm): upper heating value 36.29 MJ/kg; lower heating value 34.78 MJ/kg; H2O 11129; O 41000; H 75000; C 821000; S 300; N 13100; P 600; B n.a.; Cl 6300; Br 6800; F 130; I n.a.; Ag n.a.; As 10; Ba 137; Cd 115; Co 29.478; Cr 34; Cu 3194.1; Hg 1.4; Mn 4; Mo 2; Ni 703; Pb 127; Sb 4795.2; Se 1.9596; Sn 267; V 0.5; Zn 361; Be 0.46656; Sc n.a.; Sr 82.582; Ti 4187; Tl 0.37325; W n.a.; Si 3547; Fe 1483; Ca 3177; Al 2020; K 233; Mg n.a.; Na 128; . // Share of carbon in waste that is biogenic 0%. Share of metals in waste not oxidised and bulk-recyclable (exclude very small or thin parts) Iron: 0%; Alu: 0%; Copper: 0%. Overall degradability of waste during 100 years: 1%.

## Included activities start
from final waste deposition (without transports to the site)

## Included activities end
Waste-specific short-term emissions to air via landfill gas and landfill leachate. Waste-specific long-term emissions from landfill.

## Geography
Given name of landfill location is 'infiltration class 4 wet (2018)'. Landfill site with mean annual temperature (MAT) of 8 degC, mean annual precipitation (MAP) of 1100 mm/year, and net infiltration of 500 mm/year.
Climate adjustments result in an alpha t (temperature) for permafrost areas of 0.999. Total climate adjustments with alpha pt of 0.999.

## Technology
This is an inventory for an unsanitary, sub-controlled landfill for municipal solid waste. Ultimate average landfill height is 15 meters. Operation phase duration is 25 years.Percentage of landfill gas directly emitted is 100w%.
Leachate of the landfill is not treated. Based on average waste composition and climate data the end of carbonate phase is estimated to be reached 3382 years after waste deposition.

## Reference product
- waste plastic, consumer electronics: -1 kg; By-product classification Waste; CPC 39270: Waste, parings and scrap of plastics
  main reference product of this activity (supply of disposal service).
  production volume 4 kg
    placeholder
  property heating value, net 34.78 MJ
    Assumed equal to "waste plastic, consumer electronics, sorted".
  property price 0 EUR2005
    Waste products are assigned a price of zero as they are assumed to require further treatment.
  properties: aluminium content 0.0020427, antimony content 0.0048492, arsenic content 1.0113e-5, barium content 0.00013854, beryllium content 4.7181e-7, bromine content 0.0068765, cadmium content 0.00011629, calcium content 0.0032128, carbon allocation 0.820999 kg, carbon content 0.83024, carbon content, fossil 0.83024, chlorine content 0.0063709, chromium content 3.4383e-5, cobalt content 2.9809e-5, copper content 0.0032301, dry mass 0.98887 kg, fluorine content 0.00013146, heating value, gross 36.287 MJ, hydrogen content 0.075844, iron content 0.0014997, lead content 0.00012843, manganese content 4.045e-6, mercury content 1.4158e-6, molybdenum content 2.0225e-6, nickel content 0.00071091, nitrogen content 0.013247, oxygen content 0.041461, phosphorus content 0.00060675, potassium content 0.00023562, selenium content 1.9816e-6, silicon content 0.0035869, sodium content 0.00012944, strontium content 8.3511e-5, sulfur content 0.00030338, thallium content 3.7745e-7, tin content 0.00027, titanium content 0.0042341, vanadium content 5.0563e-7, water content 0.011254, water in wet mass 0.011129 kg, wet mass 1 kg, zinc content 0.00036506

## Inputs from technosphere
- diesel, burned in building machine: 0.046738 MJ; lognormal variance with pedigree 0.088256, pedigree (1,1,4,1,1)
  for waste distribution and compaction.
  Uncertainty: Uncertainty calculated from uncertainty in base parameters.
  properties: heating value, net 1 MJ
- excavation, skid-steer loader: 0.00031708 m3; lognormal variance with pedigree 0.088256, pedigree (1,1,4,1,1)
  application of daily cover.
  Uncertainty: Uncertainty calculated from uncertainty in base parameters.

## Inputs from nature
- Occupation, dump site [natural resource, land]: 0.0023333 m2*year; lognormal variance with pedigree 0.088256, pedigree (1,1,4,1,1)
  for landfill operation phase and spontaneous renaturation.
  Uncertainty: Uncertainty calculated from uncertainty in base parameters.

## Emissions to nature
- Aluminium III [air, non-urban air or from high stacks]: 2.5214e-10 kg; lognormal variance with pedigree 0.60596, pedigree (1,1,4,1,1)
  burden from direct release or incineration of landfill biogas; or windblown leachate evaporite in arid climates.
  Uncertainty: Uncertainty calculated from unertainty of the waste composition of this waste, uncertainty in waste decomposition and short-term leaching in landfill
- Antimony ion [air, non-urban air or from high stacks]: 1.2627e-9 kg; lognormal variance with pedigree 0.555, pedigree (1,1,4,1,1)
  (same comment as for Aluminium III)
- Arsenic ion [air, non-urban air or from high stacks]: 2.515e-10 kg; lognormal variance with pedigree 0.60954, pedigree (1,1,4,1,1)
  (same comment as for Aluminium III)
- Barium II [air, non-urban air or from high stacks]: 3.918e-10 kg; lognormal variance with pedigree 0.59397, pedigree (1,1,4,1,1)
  (same comment as for Aluminium III)
- Beryllium II [air, non-urban air or from high stacks]: 6.7732e-14 kg; lognormal variance with pedigree 0.87649, pedigree (1,1,4,1,1)
  (same comment as for Aluminium III)
- Bromine [air, non-urban air or from high stacks]: 2.3977e-6 kg; lognormal variance with pedigree 0.3088, pedigree (1,1,4,1,1)
  (same comment as for Aluminium III)
- Cadmium II [air, non-urban air or from high stacks]: 1.3474e-9 kg; lognormal variance with pedigree 0.55361, pedigree (1,1,4,1,1)
  (same comment as for Aluminium III)
- Calcium [air, non-urban air or from high stacks]: 1.033e-9 kg; lognormal variance with pedigree 0.56121, pedigree (1,1,4,1,1)
  (same comment as for Aluminium III)
- Carbon dioxide, fossil [air, non-urban air or from high stacks]: 0.012859 kg; lognormal variance with pedigree 0.101235, pedigree (1,1,4,1,1)
  burden from direct release or incineration of landfill biogas.
  Uncertainty: Uncertainty calculated from unertainty of the waste composition of this waste, uncertainty in waste decomposition and short-term leaching in landfill
- Chromium III [air, non-urban air or from high stacks]: 9.6773e-13 kg; lognormal variance with pedigree 0.78684, pedigree (1,1,4,1,1)
  (same comment as for Aluminium III)
- Cobalt II [air, non-urban air or from high stacks]: 2.3659e-11 kg; lognormal variance with pedigree 0.68622, pedigree (1,1,4,1,1)
  (same comment as for Aluminium III)
- Copper ion [air, non-urban air or from high stacks]: 4.4636e-11 kg; lognormal variance with pedigree 0.65938, pedigree (1,1,4,1,1)
  (same comment as for Aluminium III)
- Hydrochloric acid [air, non-urban air or from high stacks]: 2.2841e-6 kg; lognormal variance with pedigree 0.31114, pedigree (1,1,4,1,1)
  (same comment as for Aluminium III)
- Hydrogen fluoride [air, non-urban air or from high stacks]: 5.1758e-7 kg; lognormal variance with pedigree 0.36057, pedigree (1,1,4,1,1)
  (same comment as for Aluminium III)
- Iron ion [air, non-urban air or from high stacks]: 5.0863e-11 kg; lognormal variance with pedigree 0.65627, pedigree (1,1,4,1,1)
  (same comment as for Aluminium III)
- Lead II [air, non-urban air or from high stacks]: 2.4914e-12 kg; lognormal variance with pedigree 0.75447, pedigree (1,1,4,1,1)
  (same comment as for Aluminium III)
- Manganese II [air, non-urban air or from high stacks]: 1.1439e-11 kg; lognormal variance with pedigree 0.71109, pedigree (1,1,4,1,1)
  (same comment as for Aluminium III)
- Mercury II [air, non-urban air or from high stacks]: 3.8315e-10 kg; lognormal variance with pedigree 0.59506, pedigree (1,1,4,1,1)
  (same comment as for Aluminium III)
- Methane, fossil [air, non-urban air or from high stacks]: 0.0059393 kg; lognormal variance with pedigree 0.11137, pedigree (1,1,4,1,1)
  (same comment as for Carbon dioxide, fossil)
- Molybdenum VI [air, non-urban air or from high stacks]: 5.2665e-13 kg; lognormal variance with pedigree 0.81053, pedigree (1,1,4,1,1)
  (same comment as for Aluminium III)
- Nickel II [air, non-urban air or from high stacks]: 1.0206e-10 kg; lognormal variance with pedigree 0.63548, pedigree (1,1,4,1,1)
  (same comment as for Aluminium III)
- Nitrogen oxides [air, non-urban air or from high stacks]: 1.7946e-7 kg; lognormal variance with pedigree 0.2508, pedigree (1,1,4,1,1)
  (same comment as for Carbon dioxide, fossil)
- Potassium I [air, non-urban air or from high stacks]: 4.2537e-10 kg; lognormal variance with pedigree 0.59092, pedigree (1,1,4,1,1)
  (same comment as for Aluminium III)
- Selenium IV [air, non-urban air or from high stacks]: 5.16e-13 kg; lognormal variance with pedigree 0.81119, pedigree (1,1,4,1,1)
  (same comment as for Aluminium III)
- Silicon [air, non-urban air or from high stacks]: 4.4274e-10 kg; lognormal variance with pedigree 0.58805, pedigree (1,1,4,1,1)
  (same comment as for Aluminium III)
- Sodium [air, non-urban air or from high stacks]: 1.3227e-9 kg; lognormal variance with pedigree 0.55418, pedigree (1,1,4,1,1)
  (same comment as for Aluminium III)
- Strontium [air, non-urban air or from high stacks]: 1.1988e-11 kg; lognormal variance with pedigree 0.70643, pedigree (1,1,4,1,1)
  (same comment as for Aluminium III)
- Sulfur dioxide [air, non-urban air or from high stacks]: 3.9104e-7 kg; lognormal variance with pedigree 0.38915, pedigree (1,1,4,1,1)
  (same comment as for Carbon dioxide, fossil)
- Thallium I [air, non-urban air or from high stacks]: 5.4185e-14 kg; lognormal variance with pedigree 0.88365, pedigree (1,1,4,1,1)
  (same comment as for Aluminium III)
- Tin ion [air, non-urban air or from high stacks]: 3.9287e-12 kg; lognormal variance with pedigree 0.73862, pedigree (1,1,4,1,1)
  (same comment as for Aluminium III)
- Titanium ion [air, non-urban air or from high stacks]: 5.2262e-10 kg; lognormal variance with pedigree 0.58285, pedigree (1,1,4,1,1)
  (same comment as for Aluminium III)
- Vanadium V [air, non-urban air or from high stacks]: 1.3166e-13 kg; lognormal variance with pedigree 0.85542, pedigree (1,1,4,1,1)
  (same comment as for Aluminium III)
- Zinc II [air, non-urban air or from high stacks]: 3.7959e-11 kg; lognormal variance with pedigree 0.66759, pedigree (1,1,4,1,1)
  (same comment as for Aluminium III)
- Heat, waste [soil, industrial]: 0.22951 MJ; lognormal variance with pedigree 0.084516, pedigree (1,1,4,1,1)
  burden from short-term decomposition of waste (0-100a).
  Uncertainty: Uncertainty calculated from unertainty of the waste composition of this waste, uncertainty in waste decomposition and short-term leaching in landfill
- Aluminium III [water, ground-]: 1.0085e-6 kg; lognormal variance with pedigree 0.3355, pedigree (1,1,4,1,1)
  burden from short-term leachate to groundwater in uncontrolled landfill in moist cimate.
  Uncertainty: Uncertainty calculated from unertainty of the waste composition of this waste, uncertainty in waste decomposition and short-term leaching in landfill
- Aluminium III [water, ground-, long-term]: 0.002019 kg; lognormal variance with pedigree 0.14965, pedigree (1,1,4,1,1)
  Emissions from long-term leachate (>100a) directly from MSW landfill and indirectly via incineration of treatement sludge from leachate treatement.
  Uncertainty: Uncertainty calculated depending on waste input and uncertainty of long-term transfer coefficents in landfill.
- Ammonium [water, ground-]: 0.00012467 kg; lognormal variance with pedigree 0.15857, pedigree (1,1,4,1,1)
  (same comment as for Aluminium III)
- Ammonium [water, ground-, long-term]: 0.0052082 kg; lognormal variance with pedigree 0.091863, pedigree (1,1,4,1,1)
  (same comment as for Aluminium III)
- Antimony ion [water, ground-]: 5.0508e-6 kg; lognormal variance with pedigree 0.28383, pedigree (1,1,4,1,1)
  (same comment as for Aluminium III)
- Antimony ion [water, ground-, long-term]: 0.00036883 kg; lognormal variance with pedigree 0.53345, pedigree (1,1,4,1,1)
  (same comment as for Aluminium III)
- Arsenic ion [water, ground-]: 1.794e-8 kg; lognormal variance with pedigree 0.46936, pedigree (1,1,4,1,1)
  (same comment as for Aluminium III)
- Arsenic ion [water, ground-, long-term]: 9.9818e-6 kg; lognormal variance with pedigree 0.32498, pedigree (1,1,4,1,1)
  (same comment as for Aluminium III)
- BOD5, Biological Oxygen Demand [water, ground-]: 6.1843e-5 kg; lognormal variance with pedigree 0.21191, pedigree (1,1,4,1,1)
  (same comment as for Aluminium III)
- BOD5, Biological Oxygen Demand [water, ground-, long-term]: 0.21046 kg; lognormal variance with pedigree 0.0083106, pedigree (1,1,4,1,1)
  (same comment as for Aluminium III)
- Barium II [water, ground-]: 1.5672e-6 kg; lognormal variance with pedigree 0.32518, pedigree (1,1,4,1,1)
  (same comment as for Aluminium III)
- Barium II [water, ground-, long-term]: 0.00013543 kg; lognormal variance with pedigree 0.23804, pedigree (1,1,4,1,1)
  (same comment as for Aluminium III)
- Beryllium II [water, ground-]: 2.7093e-10 kg; lognormal variance with pedigree 0.60586, pedigree (1,1,4,1,1)
  (same comment as for Aluminium III)
- Beryllium II [water, ground-, long-term]: 4.6629e-7 kg; lognormal variance with pedigree 0.42494, pedigree (1,1,4,1,1)
  (same comment as for Aluminium III)
- Bromine [water, ground-]: 0.00017104 kg; lognormal variance with pedigree 0.17618, pedigree (1,1,4,1,1)
  (same comment as for Aluminium III)
- Bromine [water, ground-, long-term]: 0.0066266 kg; lognormal variance with pedigree 0.11154, pedigree (1,1,4,1,1)
  (same comment as for Aluminium III)
- COD, Chemical Oxygen Demand [water, ground-]: 0.00026123 kg; lognormal variance with pedigree 0.21191, pedigree (1,1,4,1,1)
  (same comment as for Aluminium III)
- COD, Chemical Oxygen Demand [water, ground-, long-term]: 0.889 kg; lognormal variance with pedigree 0.0083106, pedigree (1,1,4,1,1)
  (same comment as for Aluminium III)
- Cadmium II [water, ground-]: 2.0211e-7 kg; lognormal variance with pedigree 0.3889, pedigree (1,1,4,1,1)
  (same comment as for Aluminium III)
- Cadmium II [water, ground-, long-term]: 0.0001148 kg; lognormal variance with pedigree 0.24386, pedigree (1,1,4,1,1)
  (same comment as for Aluminium III)
- Calcium II [water, ground-]: 4.1318e-6 kg; lognormal variance with pedigree 0.28994, pedigree (1,1,4,1,1)
  (same comment as for Aluminium III)
- Calcium II [water, ground-, long-term]: 0.0031729 kg; lognormal variance with pedigree 0.13522, pedigree (1,1,4,1,1)
  (same comment as for Aluminium III)
- Chloride [water, ground-]: 0.00015846 kg; lognormal variance with pedigree 0.17852, pedigree (1,1,4,1,1)
  (same comment as for Aluminium III)
- Chloride [water, ground-, long-term]: 0.0061393 kg; lognormal variance with pedigree 0.11388, pedigree (1,1,4,1,1)
  (same comment as for Aluminium III)
- Chromium VI [water, ground-]: 3.8709e-9 kg; lognormal variance with pedigree 0.519, pedigree (1,1,4,1,1)
  (same comment as for Aluminium III)
- Chromium VI [water, ground-, long-term]: 1.168e-7 kg; lognormal variance with pedigree 2.2963, pedigree (1,1,4,1,1)
  (same comment as for Aluminium III)
- Cobalt II [water, ground-]: 9.4634e-8 kg; lognormal variance with pedigree 0.41508, pedigree (1,1,4,1,1)
  (same comment as for Aluminium III)
- Cobalt II [water, ground-, long-term]: 2.9383e-5 kg; lognormal variance with pedigree 0.28915, pedigree (1,1,4,1,1)
  (same comment as for Aluminium III)
- Copper ion [water, ground-]: 1.5623e-7 kg; lognormal variance with pedigree 0.39761, pedigree (1,1,4,1,1)
  (same comment as for Aluminium III)
- Copper ion [water, ground-, long-term]: 0.003194 kg; lognormal variance with pedigree 0.13505, pedigree (1,1,4,1,1)
  (same comment as for Aluminium III)
- DOC, Dissolved Organic Carbon [water, ground-]: 0.00023884 kg; lognormal variance with pedigree 0.21191, pedigree (1,1,4,1,1)
  (same comment as for Aluminium III)
- DOC, Dissolved Organic Carbon [water, ground-, long-term]: 0.8128 kg; lognormal variance with pedigree 0.0083106, pedigree (1,1,4,1,1)
  (same comment as for Aluminium III)
- Fluoride [water, ground-]: 9.539e-8 kg; lognormal variance with pedigree 0.41305, pedigree (1,1,4,1,1)
  (same comment as for Aluminium III)
- Fluoride [water, ground-, long-term]: 0.00012941 kg; lognormal variance with pedigree 0.23978, pedigree (1,1,4,1,1)
  (same comment as for Aluminium III)
- Heat, waste [water, ground-, long-term]: 35.924 MJ; lognormal variance with pedigree 0.020651, pedigree (1,1,4,1,1)
  burden from long-term decomposition of waste (>100a).
  Uncertainty: Uncertainty calculated from unertainty of the waste composition of this waste, uncertainty in waste decomposition and short-term leaching in landfill
- Hydrogen sulfide [water, ground-]: 8.1281e-8 kg; lognormal variance with pedigree 0.33333, pedigree (1,1,4,1,1)
  (same comment as for Aluminium III)
- Hydrogen sulfide [water, ground-, long-term]: 2.1757e-5 kg; lognormal variance with pedigree 0.21201, pedigree (1,1,4,1,1)
  (same comment as for Aluminium III)
- Iron ion [water, ground-]: 2.0345e-7 kg; lognormal variance with pedigree 0.38803, pedigree (1,1,4,1,1)
  (same comment as for Aluminium III)
- Iron ion [water, ground-, long-term]: 0.0014828 kg; lognormal variance with pedigree 0.1596, pedigree (1,1,4,1,1)
  (same comment as for Aluminium III)
- Lead II [water, ground-]: 7.4741e-9 kg; lognormal variance with pedigree 0.49699, pedigree (1,1,4,1,1)
  (same comment as for Aluminium III)
- Lead II [water, ground-, long-term]: 0.00012699 kg; lognormal variance with pedigree 0.24055, pedigree (1,1,4,1,1)
  (same comment as for Aluminium III)
- Manganese II [water, ground-]: 4.5757e-8 kg; lognormal variance with pedigree 0.4423, pedigree (1,1,4,1,1)
  (same comment as for Aluminium III)
- Manganese II [water, ground-, long-term]: 3.9542e-6 kg; lognormal variance with pedigree 0.35516, pedigree (1,1,4,1,1)
  (same comment as for Aluminium III)
- Mercury II [water, ground-]: 9.5787e-10 kg; lognormal variance with pedigree 0.56499, pedigree (1,1,4,1,1)
  (same comment as for Aluminium III)
- Mercury II [water, ground-, long-term]: 1.3987e-6 kg; lognormal variance with pedigree 0.38944, pedigree (1,1,4,1,1)
  (same comment as for Aluminium III)
- Molybdenum VI [water, ground-]: 2.1066e-9 kg; lognormal variance with pedigree 0.53936, pedigree (1,1,4,1,1)
  (same comment as for Aluminium III)
- Molybdenum VI [water, ground-, long-term]: 6.3319e-7 kg; lognormal variance with pedigree 0.46047, pedigree (1,1,4,1,1)
  (same comment as for Aluminium III)
- Nickel II [water, ground-]: 4.0822e-7 kg; lognormal variance with pedigree 0.36484, pedigree (1,1,4,1,1)
  (same comment as for Aluminium III)
- Nickel II [water, ground-, long-term]: 0.00070259 kg; lognormal variance with pedigree 0.18393, pedigree (1,1,4,1,1)
  (same comment as for Aluminium III)
- Nitrate [water, ground-]: 1.3111e-5 kg; lognormal variance with pedigree 0.15857, pedigree (1,1,4,1,1)
  (same comment as for Aluminium III)
- Nitrate [water, ground-, long-term]: 0.00054772 kg; lognormal variance with pedigree 0.091863, pedigree (1,1,4,1,1)
  (same comment as for Aluminium III)
- Nitrite [water, ground-]: 6.7856e-6 kg; lognormal variance with pedigree 0.15857, pedigree (1,1,4,1,1)
  (same comment as for Aluminium III)
- Nitrite [water, ground-, long-term]: 0.00028347 kg; lognormal variance with pedigree 0.091863, pedigree (1,1,4,1,1)
  (same comment as for Aluminium III)
- Nitrogen, organic bound [water, ground-]: 0.00020377 kg; lognormal variance with pedigree 0.15857, pedigree (1,1,4,1,1)
  (same comment as for Aluminium III)
- Nitrogen, organic bound [water, ground-, long-term]: 0.0085124 kg; lognormal variance with pedigree 0.091863, pedigree (1,1,4,1,1)
  (same comment as for Aluminium III)
- Phosphate [water, ground-]: 1.0269e-6 kg; lognormal variance with pedigree 0.37132, pedigree (1,1,4,1,1)
  (same comment as for Aluminium III)
- Phosphate [water, ground-, long-term]: 0.00012357 kg; lognormal variance with pedigree 0.64472, pedigree (1,1,4,1,1)
  (same comment as for Aluminium III)
- Potassium I [water, ground-]: 1.7015e-6 kg; lognormal variance with pedigree 0.32094, pedigree (1,1,4,1,1)
  (same comment as for Aluminium III)
- Potassium I [water, ground-, long-term]: 0.0002313 kg; lognormal variance with pedigree 0.22039, pedigree (1,1,4,1,1)
  (same comment as for Aluminium III)
- Selenium IV [water, ground-]: 2.064e-9 kg; lognormal variance with pedigree 0.54002, pedigree (1,1,4,1,1)
  (same comment as for Aluminium III)
- Selenium IV [water, ground-, long-term]: 4.3467e-7 kg; lognormal variance with pedigree 0.52019, pedigree (1,1,4,1,1)
  (same comment as for Aluminium III)
- Silicon [water, ground-]: 1.771e-6 kg; lognormal variance with pedigree 0.3176, pedigree (1,1,4,1,1)
  (same comment as for Aluminium III)
- Silicon [water, ground-, long-term]: 5.708e-5 kg; lognormal variance with pedigree 1.1974, pedigree (1,1,4,1,1)
  (same comment as for Aluminium III)
- Sodium I [water, ground-]: 5.2907e-6 kg; lognormal variance with pedigree 0.29166, pedigree (1,1,4,1,1)
  (same comment as for Aluminium III)
- Sodium I [water, ground-, long-term]: 0.00012271 kg; lognormal variance with pedigree 0.24033, pedigree (1,1,4,1,1)
  (same comment as for Aluminium III)
- Strontium [water, ground-]: 4.7954e-8 kg; lognormal variance with pedigree 0.43579, pedigree (1,1,4,1,1)
  (same comment as for Aluminium III)
- Strontium [water, ground-, long-term]: 8.2534e-5 kg; lognormal variance with pedigree 0.25488, pedigree (1,1,4,1,1)
  (same comment as for Aluminium III)
- Sulfate [water, ground-]: 3.1181e-6 kg; lognormal variance with pedigree 0.33333, pedigree (1,1,4,1,1)
  (same comment as for Aluminium III)
- Sulfate [water, ground-, long-term]: 0.00083464 kg; lognormal variance with pedigree 0.21201, pedigree (1,1,4,1,1)
  (same comment as for Aluminium III)
- TOC, Total Organic Carbon [water, ground-]: 0.00023884 kg; lognormal variance with pedigree 0.21191, pedigree (1,1,4,1,1)
  (same comment as for Aluminium III)
- TOC, Total Organic Carbon [water, ground-, long-term]: 0.8128 kg; lognormal variance with pedigree 0.0083106, pedigree (1,1,4,1,1)
  (same comment as for Aluminium III)
- Thallium I [water, ground-]: 2.1674e-10 kg; lognormal variance with pedigree 0.61301, pedigree (1,1,4,1,1)
  (same comment as for Aluminium III)
- Thallium I [water, ground-, long-term]: 3.7303e-7 kg; lognormal variance with pedigree 0.4321, pedigree (1,1,4,1,1)
  (same comment as for Aluminium III)
- Tin ion [water, ground-]: 1.5715e-8 kg; lognormal variance with pedigree 0.47231, pedigree (1,1,4,1,1)
  (same comment as for Aluminium III)
- Tin ion [water, ground-, long-term]: 0.00026698 kg; lognormal variance with pedigree 0.21587, pedigree (1,1,4,1,1)
  (same comment as for Aluminium III)
- Titanium ion [water, ground-]: 2.0905e-6 kg; lognormal variance with pedigree 0.31239, pedigree (1,1,4,1,1)
  (same comment as for Aluminium III)
- Titanium ion [water, ground-, long-term]: 0.0041849 kg; lognormal variance with pedigree 0.12653, pedigree (1,1,4,1,1)
  (same comment as for Aluminium III)
- Vanadium V [water, ground-]: 5.2665e-10 kg; lognormal variance with pedigree 0.58425, pedigree (1,1,4,1,1)
  (same comment as for Aluminium III)
- Vanadium V [water, ground-, long-term]: 1.1473e-7 kg; lognormal variance with pedigree 0.55811, pedigree (1,1,4,1,1)
  (same comment as for Aluminium III)
- Zinc II [water, ground-]: 1.7081e-7 kg; lognormal variance with pedigree 0.3935, pedigree (1,1,4,1,1)
  (same comment as for Aluminium III)
- Zinc II [water, ground-, long-term]: 0.00036083 kg; lognormal variance with pedigree 0.20589, pedigree (1,1,4,1,1)
  (same comment as for Aluminium III)

## Review by Gabor Doka 2018-05-14
passed
