# treatment of sewage sludge, 97% water, WWT, WW from ammonium paratungstate production, landfarming

Dataset: EcoSpold 2, unit process
Geography: RoW
Time period: 2000-01-01 to 2022-12-31
Technology level: current
Classification: ISIC rev.4 ecoinvent: 3821:Treatment and disposal of non-hazardous waste
Scenario: Business-as-Usual
System model: Allocation at the point of substitution
Generated by: Nikolia Stoikou
Database: ecoinvent
isCopyrightProtected: true

## General comment
The process represents the treatment of a waste (sewage sludge) that is exclusively produced from another waste treatment. Recommended use of this dataset: to be used within the specific chain of treatments for 'wastewater from ammonium paratungstate production'. Share of biogenic carbon in the sludge: 0%.

## Included activities start
The activity starts with the waste being available for landfarming. Collection and transportation of the waste to this process is not included.

## Included activities end
The activity ends with the waste being treated and waste-specific emissions from the landfarming process are released to the environment (air, water and soil). The activity is considering local fate of emissions and the initial specific wastewater composition (generating the sewage sludge). Further, it includes provision of fertiliser functions for N, P, K, if present in the sludge.

## Geography
The site has mean annual temperature (MAT) of 16.743579766537 degC, mean annual precipitation (MAP) of 1250.84108527132 mm/year, mean annual actual evaporation (EAT) of 460.58904958214 mm/year. Climate will influence the local fate emissions based on the elemental composition of the sludge as well as water evaporation to air (= consumptive water use).
References: UN data, 2020. Precipitation, Environment Statistics Database, United Nations Statistics Division Available at: http://data.un.org/Data.aspx?q=precipitation&d=ENV&f=variableID%3a6;
World Bank, 2022. Surface area (sq.km), World Bank Group Available at: https://data.worldbank.org/indicator/AG.SRF.TOTL.K2;
Doka G.,2021. A model for composition-specific life cycle inventories of regionalised wastewater fates, Zurich, Switzerland. http://www.doka.ch/publications.htm

## Technology
Landfarming is the process of spreading a substrate on agricultural soil. Sewage sludge is generated in the wastewater treatment of wastewater from ammonium paratungstate production. Spreading of liquid sewage sludge (97w% water content) on agricultural fields with mobile vacuum tanker.

## Reference product
- organic phosphorus fertiliser, as P2O5: 1 kg; By-product classification allocatable product; CPC 34659: Fertilizers n.e.c.; lognormal variance with pedigree 0.070927, pedigree (1,1,1,1,1)
  gross fertilizer function provided from sewage sludge spreading on agricultural fields.
  Uncertainty: Uncertainty calculated from upstream wastewater technosphere fate uncertainty, wastewater composition uncertainty, and treatment model uncertainty
  production volume 185829 kg
    Calculated in proportion to wastewater reference product.
  property oxygen content 0.563579
    Oxygen content (on a dry matter basis) of organic phosphorus fertiliser, as P2O5 is calculated from the molecular formula of the substance (Phosphorus).
  property phosphorus content 0.436421
    Phosphorus content (on a dry matter basis) of organic phosphorus fertiliser, as P2O5 is calculated from the molecular formula of the substance (Phosphorus).
  property price 0.241 EUR2005
    Set equal to the price of the corresponding inorganic fertiliser
  properties: carbon allocation 0 kg, carbon content 0, carbon content, fossil 0, carbon content, non-fossil 0, dry mass 1 kg, water content 0, water in wet mass 0 kg, wet mass 1 kg

## Inputs from technosphere
- aluminium sulfate, powder: 0.00020951, 0.000127295 kg (2 suppliers, which the file names only by identifier); sum of these 0.000336805 kg
- ammonia, anhydrous, liquid: 2.63036e-5, 2.7569e-6, 0.000636474, 0.000591024, 0.000101321, 1.35502e-5, 1.23244e-5, 0.000291559, 8.70978e-6 kg (9 suppliers, which the file names only by identifier); sum of these 0.00168402 kg
- chemical, organic: 0.000935569 kg
- electricity, medium voltage: 7.81014e-6, 2.19812e-5, 2.10123e-6, 5.85357e-7, 7.14185e-6, 9.91677e-7, 3.77534e-5, 0.000239576, 8.84591e-5, 4.7332e-5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 kWh (48 suppliers, which the file names only by identifier); sum of these 0.0121624 kWh
- fatty alcohol: 0.000935569 kg
- inert waste: -0.00363303, -6.35168e-6, -0.00597312 kg (3 suppliers, which the file names only by identifier); sum of these -0.0096125 kg
- kerosene: 1.51786e-5, 0.00650764, 9.09501e-5, 0.00424316, 0.000288545, 1.92726e-5, 3.73509e-5, 2.47216e-5 kg (8 suppliers, which the file names only by identifier); sum of these 0.0112268 kg
- magnesium sulfate: 0.000121624 kg
- non-ferrous metal smelter: 7.0609e-14 unit
- soda ash, light: 0.0200713 kg
- sodium hydrosulfide: 0.000425992 kg
- sodium hydroxide, without water, in 50% solution state: 0.000449073 kg
- spent solvent mixture: -0.0125731, -4.99022e-5, -0.00766951 kg (3 suppliers, which the file names only by identifier); sum of these -0.0202925 kg
- sulfuric acid: 0.00280819, 0.00170621 kg (2 suppliers, which the file names only by identifier); sum of these 0.0045144 kg
- tungsten concentrate: 0.013098 kg
- wastewater from ammonium paratungstate production: -0.000218026, -1.01121e-5 m3 (2 suppliers, which the file names only by identifier); sum of these -0.000228138 m3
- water, deionised: 1.68556e-5, 0.0212158, 0.0349015 kg (3 suppliers, which the file names only by identifier); sum of these 0.0561341 kg

## Inputs from nature
- Water, well, in ground [natural resource, in water]: 0.000161293 m3

## Emissions to nature
- Ammonia [air, non-urban air or from high stacks]: 0.00101229 kg
- Carbon dioxide, fossil [air, non-urban air or from high stacks]: 0.00275057 kg
- Hydrogen sulfide [air, non-urban air or from high stacks]: 2.8836e-5 kg
