# treatment of sewage sludge, 70% water, WWT, WW from vegetable oil refinery, municipal incineration

Dataset: EcoSpold 2, unit process
Geography: GLO
Time period: 2006-01-01 to 2022-12-31
Technology level: current
Classification: ISIC rev.4 ecoinvent: 3821:Treatment and disposal of non-hazardous waste
Scenario: Business-as-Usual
System model: Allocation at the point of substitution
Generated by: Nikolia Stoikou
Database: ecoinvent
isCopyrightProtected: true

## General comment
The process represents the treatment of a waste (sewage sludge) that is exclusively produced from another waste treatment. Municipal incineration is the controlled combustion of a waste. Sewage sludge is generated in the wastewater treatment of 'wastewater from vegetable oil refinery'. Recommended use of this dataset: to be used within the specific chain of treatments for 'wastewater from vegetable oil refinery'. Share of biogenic carbon in the sludge: 98.961%.

## Included activities start
The activity starts with the waste being available at the gate of the treatment facility. Collection and transportation of the waste to the treatment plant is not included.

## Included activities end
The activity ends with the waste being treated and waste-specific emissions from the incineration process are released to the environment (air and water).

## Geography
Modelling parameters affecting the treatment technology are not specific to this geography.

## Technology
The waste is treated in the incineration plant with flue gas cleaning. Incineration is the controlled combustion of a waste. Auxiliary material consumption for this step of air pollution control (APC) are included in the process. Infrastructure is also included in the process. Air polution control includes, electrostatic precipitator for fly ash (ESP), wet flue gas scrubber and 25% SNCR , 42.77% SCR-high dust , 32.68% SCR-low dust -DeNOx facilities and 0% without DeNOx (weighted according to mass of burnt waste). Efficiency of iron scrap separation from slag : 58%. Efficiency of aluminium scrap separation from slag : 31%. Efficiency of copper scrap separation from slag : 31%. Gross electric efficiency technology mix 15.84% and Gross thermal efficiency technology mix 28.51%

## Reference product
- heat, for reuse in municipal waste incineration only: 1 MJ; By-product classification allocatable product; CPC 17300: Steam and hot water; lognormal variance with pedigree 0.14823, pedigree (1,1,1,1,1)
  net useful heat generated from this waste and used in internal MSWI plant energy redistribution.
  Uncertainty: uncertainty is calculated from uncertainties in waste composition and uncertainties in energy efficiency and the uncertainty in internal energy demand
  production volume 4.17486e10 MJ
    Calculated from the production volume of the reference product in proportion to the respective output amounts.
  property price 0.0106 EUR2005
    Average European district heat price from Ecoheatcool and Euroheat 2005-2006, Ecoheat Work package 1: The European heat market. Final report. 10.6 EUR/GJ i s the price of district heat. http://www.solarthermalworld.org/files/Ecoheatcool%20WP1%20Web.pdf?download
  properties: carbon allocation 0 kg, carbon content 0

## Inputs from technosphere
- air compressor, screw-type compressor, 300kW: 1.28751e-9 unit
- air compressor, screw-type compressor, 4kW: 1.2053e-10 unit
- alkyd paint, white, without solvent, in 60% solution state: 9.07195e-10, 6.91346e-9 kg (2 suppliers, which the file names only by identifier); sum of these 7.82065e-9 kg
- aluminium, primary, ingot: 3.06693e-9, 4.76596e-9, 8.65386e-10, 5.0249e-10 kg (4 suppliers, which the file names only by identifier); sum of these 9.20077e-9 kg
- building, hall, steel construction: 1.47008e-6 m2
- carton board box production, with offset printing: 4.19023e-5 kg
- chlorine, liquid: 2.64708e-8, 3.30935e-9 kg (2 suppliers, which the file names only by identifier); sum of these 2.97802e-8 kg
- chromium steel pipe: 2.00735e-6 kg
- concrete, normal strength: 7.66732e-10, 3.46486e-12, 2.59478e-12, 3.82849e-11, 3.98924e-12, 3.22957e-11, 1.3696e-9, 7.69292e-11, 6.30535e-12 m3 (9 suppliers, which the file names only by identifier); sum of these 2.30019e-9 m3
- copper scrap, sorted, pressed: -5.29137e-6 kg
- copper, cathode: 5.29137e-6 kg
- cottonseed oil, crude: 0.000558304 kg
- drawing of pipe, steel: 2.00735e-6 kg
- electricity, medium voltage: 3.31293e-5, 2.98752e-5, 5.43166e-9, 1.12959e-6, 4.17081e-7, 6.44342e-8, 3.17311e-7, 7.47291e-8, 2.56353e-6, 3.67508e-8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 kWh (35 suppliers, which the file names only by identifier); sum of these 0.000230007 kWh
- extrusion of plastic sheets and thermoforming, inline: 1.86205e-7 kg
- extrusion, plastic film: 7.60957e-6 kg
- fish canning plant: 5.00812e-14, 5.22248e-13 unit (2 suppliers, which the file names only by identifier); sum of these 5.72329e-13 unit
- gas boiler: 2.4106e-11 unit
- generator, 200kW electrical: 6.41624e-10 unit
- glass fibre reinforced plastic, polyamide, injection moulded: 1.63313e-7 kg
- glass wool mat: 3.1846e-6 kg
- heat, district or industrial, natural gas: 0.000657607, 3.43387e-5 MJ (2 suppliers, which the file names only by identifier); sum of these 0.000691946 MJ
- heat, district or industrial, other than natural gas: 0.000214369, 0.00167426 MJ (2 suppliers, which the file names only by identifier); sum of these 0.00188863 MJ
- industrial furnace, 1MW, oil: 9.51362e-10 unit
- industrial furnace, natural gas: 6.33836e-10 unit
- lubricating oil: 1.77179e-7, 2.32487e-8 kg (2 suppliers, which the file names only by identifier); sum of these 2.00428e-7 kg
- metal working, average for chromium steel product manufacturing: 1.93369e-5 kg
- methyl ethyl ketone: 1.12804e-9, 2.52073e-10 kg (2 suppliers, which the file names only by identifier); sum of these 1.38012e-9 kg
- operation, reefer, freezing: 4.76183e-5 kg*day
- palm oil, crude: 0.0077373 kg
- polyethylene, high density, granulate: 1.86205e-7 kg
- polyethylene, low density, granulate: 7.60957e-6 kg
- polymer foaming: 4.13636e-8 kg
- propane, burned in building machine: 1.07545e-6 MJ
- pump, 40W: 1.25751e-9 unit
- scrap steel: -6.16529e-10, -2.51057e-6, -4.86619e-7 kg (3 suppliers, which the file names only by identifier); sum of these -2.99781e-6 kg
- scrap tin sheet: -3.73259e-6, -0.000280778 kg (2 suppliers, which the file names only by identifier); sum of these -0.000284511 kg
- sheet rolling, aluminium: 9.20077e-9 kg
- soap: 3.32809e-7 kg
- sodium chloride, powder: 7.86524e-6 kg
- sodium hydroxide, without water, in 50% solution state: 2.68104e-5 kg
- solvent, organic: 4.74465e-6 kg
- soybean oil, crude: 0.0032196, 0.000549166 kg (2 suppliers, which the file names only by identifier); sum of these 0.00376877 kg
- spent solvent mixture: -3.84224e-6, -2.06896e-8, -8.83097e-7 kg (3 suppliers, which the file names only by identifier); sum of these -4.74603e-6 kg
- steel, chromium steel 18/8: 9.9046e-7 kg
- steel, low-alloyed: 1.08569e-7 kg
- tap water: 1.57725e-5, 1.71655, 0.000657298, 0.000420505, 0.0056167, 4.8639e-5, 0.0971556, 0.00454006, 0.00211376 kg (9 suppliers, which the file names only by identifier); sum of these 1.82712 kg
- tin plated chromium steel sheet, 2 mm: 1.82379e-5 m2
- used insulation spiral-seam duct rockwool, DN 400: -3.16673e-6, -1.78694e-8 m (2 suppliers, which the file names only by identifier); sum of these -3.1846e-6 m
- vegetable oil refinery: 1.30646e-12 unit
- vegetable oil, refined: 0.000172224 kg
- waste aluminium: -9.20077e-9 kg
- waste concrete: -9.26132e-10, -5.48761e-6, -2.61944e-7 kg (3 suppliers, which the file names only by identifier); sum of these -5.75048e-6 kg
- waste mineral oil: -9.07943e-10, -1.62844e-7, -3.66757e-8 kg (3 suppliers, which the file names only by identifier); sum of these -2.00428e-7 kg
- waste paint on wall: -7.82065e-9 kg
- waste plastic, mixture: -1.21066e-8, -6.11772e-11, -5.4439e-8, -1.04926e-8, -8.47532e-8, -8.08919e-10, -3.17271e-10, -3.34112e-10 kg (8 suppliers, which the file names only by identifier); sum of these -1.63313e-7 kg
- waste polyethylene, for recycling, unsorted: -1.71498e-6, -2.65084e-6, -1.71498e-6, -1.71498e-6 kg (4 suppliers, which the file names only by identifier); sum of these -7.79577e-6 kg
- wastewater from vegetable oil refinery: -0.00123651 m3
- water, completely softened: 0.0247084, 0.0343764, 0.060217 kg (3 suppliers, which the file names only by identifier); sum of these 0.119302 kg
- wire drawing, copper: 3.28402e-6 kg

## Emissions to nature
- Water [air, non-urban air or from high stacks]: 0.00066219 m3
- BOD5, Biological Oxygen Demand [water, unspecified]: 4.84132e-8 kg
- COD, Chemical Oxygen Demand [water, unspecified]: 3.01652e-7 kg
- DOC, Dissolved Organic Carbon [water, unspecified]: 7.69646e-8 kg
- Nitrogen [water, unspecified]: 2.90471e-8 kg
- Phosphorus [water, unspecified]: 5.95228e-9 kg
- TOC, Total Organic Carbon [water, unspecified]: 7.69646e-8 kg

## Extrapolations
Modelling parameters are based on an average municipal solid waste incineration plant in Switzerland for the year of 2010 (grate incinerators).
