# cocoon production, silkworm rearing

Dataset: EcoSpold 2, unit process
Geography: RoW
Time period: 2015-04-01 to 2022-03-31
Technology level: current
Classification: EcoSpold01Categories: textiles/processing
Classification: ISIC rev.4 ecoinvent: 0149:Raising of other animals
Scenario: Business-as-Usual
System model: Allocation at the point of substitution
Generated by: [System]
Published in: Faist Emmenegger, M. 2018
Database: ecoinvent
isCopyrightProtected: true

## General comment
Inventory refers to 1 kg cocoons
This dataset represents the production of 65 kg of cocoons from 100 dfls (disease free layings). Sericulture is a well organised and to a large extent government supported activity in this region. It is promoted as a local revenue source for government and employment for the poor. Disinfected eggs are available at distribution centres where farmers can collect them at appropriate time and establish them at their rearing centres, where they have a mulberry garden adjacent to silkworm rearing hall (75 m2)
Rearing room is thoroughly washed, along with equipment and disinfected, prior to silkworm incubation ( 15 days prior). The required trays are arranged the loose egg spread on lncubation Fames or egg sheers suitably spread and is covered with a polythene sheet and a sheer of black paper. Requisite temperature i.e., 27-28˚C and 80 % relative humidity is maintained for incubation. Eggs hatch in 9 days and gives rise to Larva. Larva stage continues for 22-25 days during which it continues to consume mulberry leaves. After this period the larva begins to spin silk around itself and transforms to cocoon. The cocoons are collected and deposited at cocoon banks from where they are sent to reeling centres.
Total water requirement of the activity is 3.19 litre/kg cocoon, electricity requirement 2.46 kWh/ kg cocoon and 0.011 kg plstic tray, 0.0538 kg newspaper
Cocoon yields depend on silkworm variety, leaf quality and rearing conditions and are often expressed in kg of fresh cocoons per 100 disease free layings (DFL), equivalent to 40000 eggs. (Astudillo, M.F., Thalwitz & Fritz, V., 2014. Life cycle assessment of Indian silk. Journal of Cleaner Production, 81(November 2015), pp.158–167. Available at: http://linkinghub.elsevier.com/retrieve/pii/S0959652614005939.)
Average based on data collected from farmer at Guna district in the state of Madhya Pradesh (Central India). Data was also collected from Manager of District Cocoon bank, which is Government operated cocoon distribution centre.
The result of this activity is 1 kg of silk cocoons from 0.65 dfls which is equivalent to 612 eggs.
Eggs are recirculated in the system and hence not considered as input here

## Included activities start
Activities start from reception of eggs.

## Included activities end
This activity ends with produced 1 kg cocoons. The datasets includes use of water and disinfectants, mulberry leaves consumption, electricity consumption for heat and light, and plastic tray. Emissions from disinfectants are not modelled while potential N2O emissions from silkworms are modelled based in results from other insects.
Machinery is excluded.

## Reference product
- cocoons: 1 kg; name RP_amount_1; By-product classification allocatable product; CPC 02944: Silk-worm cocoons suitable for reeling
  Cocoons are not dried in this process, hence wet weight and properties are considered here
  production volume 1.3479e9 kg
    calculated based on annual silk output
  property carbon content, fossil 0
    Carbon content fossil is considered zero in all agricultural products and by-products.
  property carbon content, non-fossil 0.475
    Biogenic carbon content of vegetation on a dry mass basis (47.5% DM) derived from FAOSTAT.
    Reference: http://www.fao.org/forestry/17111/en
  property price 8.2557 EUR2005
    Litarature value. Values reported from the Indian Ministry of Textile range between 560and 469 rupied per kg, Price Data for textile, Prices (Month End) for 2018 (retrieved from: http://texmin.nic.in/sites/default/files/monthend_jan2018_1.pdf, accessed 6March 2018). A price of 500 rupies per kg is here assumed.
  properties: carbon allocation 0.2375 kg, carbon content 0.475, dry mass 0.5 kg, water content 1, water in wet mass 0.5 kg, wet mass 1 kg

## Inputs from technosphere
- biowaste: -8.34389, -0.0734872 kg (2 suppliers, which the file names only by identifier); sum of these -8.41737 kg; = 4.27*2; lognormal variance with pedigree 0.0046, pedigree (1,4,1,5,1)
  the rearing process produces a lot of organic waste, (unfed leaves and excreta of silkworms). This is estimated from In Astudillo et al. 2014, this was estimated to be about 4.27 kg of organic waste per kg cocoon on a dry basis, approximately double in wet basis.
  production volume
    Calculated from production volume of reference product using the relative outputs.
  properties: carbon content, non-fossil 0.1624, dry mass 0.4 kg, heating value, net 4.29 MJ, water content 1.5, wet mass 1 kg
  note on heating value, net: Value taken from the general comment of the treatment dataset.
- building, hall: 0.00379093 m2; lognormal variance with pedigree 0.3046, pedigree (2,1,3,5,1)
  square meters of building divided by production per year and life time of the plant.
- chemical, inorganic: 0.00650523 kg; lognormal variance with pedigree 0.0066, pedigree (1,4,3,5,1)
  sum of chemicals and disinfectants used during the process. Chemicals include: Bleaching powder, Sanaitech, Lime and Chlorophate
  properties: carbon content, fossil 0.003, dry mass 1 kg, wet mass 1 kg
  note on carbon content, fossil: This dataset is an unweighted average of 20 inorganic substances (listed in Tab 88.1, ecoinvent v2.2 report 8, part II), being part of the top100 chemicals included in this database. The C-content has also been calculated as an unweighted average of the C content of the substances composing this dataset.
- electricity, low voltage: 0.000702873, 0.00607439, 0.00019083, 0.000634973, 0.000854986, 0.000588033, 0.00324431, 0.0115364, 0.0359597, 0.00624287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 kWh (46 suppliers, which the file names only by identifier); sum of these 1.21037 kWh; lognormal variance with pedigree 0.0066, pedigree (1,4,3,5,1)
  sum of electricity used for heaters and lighting. Utilities considred here as the process is dependent on it. Heaters are only used during winters to maintain the temprature at aorund 23-25 degree C
- mulberry leaves: 22.6697 kg; lognormal variance with pedigree 0.0066, pedigree (1,4,3,5,1)
  Amount originate from primary data collection.
  properties: carbon content, non-fossil 0.475, dry mass 0.1232 kg, water content 7.11688, wet mass 1 kg
- paper, newsprint: 0.0159255, 0.0415374 kg (2 suppliers, which the file names only by identifier); sum of these 0.0574629 kg; lognormal variance with pedigree 0.0066, pedigree (1,4,3,5,1)
  Newspaper used for laying
  properties: carbon content, fossil 0.0116283, carbon content, non-fossil 0.378026, dry mass 0.945 kg, heating value, net 14.11 MJ, water content 0.0582011, wet mass 1 kg
- polyethylene terephthalate, granulate, amorphous: 0.0114609 kg; = 0.011/0.946; lognormal variance with pedigree 0.0066, pedigree (1,4,3,5,1)
  This activity should be used as follows: If an activity requires 1 kg of plastic sheets (produced by an inline plastic sheets and thermoforming process) the user should list (i) 1/0.946 = 1.0571 kg of the service and 1.0571 kg of the plastic type processed.
  properties: carbon content, fossil 0.625, dry mass 1 kg, heating value, net 22.95 MJ, wet mass 1 kg
- thermoforming of plastic sheets: 0.0114609 kg; = 0.011/0.946; lognormal variance with pedigree 0.0066, pedigree (1,4,3,5,1)
  (same comment as for polyethylene terephthalate, granulate, amorphous)

## Inputs from nature
- Water, well, in ground [natural resource, in water]: 0.0031505 m3; name water; lognormal variance with pedigree 0.0066, pedigree (1,4,3,5,1)
  3.1964 kg transformed in cubic meters. Ground water is used here, Primary data collected from silk reeling centre.

## Emissions to nature
- Dinitrogen monoxide [air, non-urban air or from high stacks]: 2.58979e-5 kg; = 7.83/298/1000; lognormal variance with pedigree 0.0066, pedigree (1,4,3,5,1)
  Taking into account the parameters in Astudillo et al. (2014) it is 7.83 g CO2eq / kg cocoon from N2O emissions, This is divided by the GWP of N2O used in that publication (298). Reference: http://www.sciencedirect.com/science/article/pii/S0959652614005939
- Water [air, unspecified]: 0.000630101 m3; lognormal variance with pedigree 0.0146, pedigree (4,4,3,5,1)
  20% evaporation rate
- BOD5, Biological Oxygen Demand [water, surface water]: 0.000758943 kg; name bod5
  According to data collected circe 0.002557 m3 of wastewater are produced in this process. Assuming a strong wastewater composition (FAOSTAT), direct emissions to a surface water body are modelled for: Dissolved solids, Suspended solids, Nitrogen (as N), Phosphorus (as P), Chloride, Grease (oils, non fossil) and BOD5. Alkalinity of water is reported to be 200 mg/L as CaCO3.
  Composition (mg/L): Dissolved solids (850), Suspended solids (350), Nitrogen-as N (85), Phosphorus-as P (20), Chloride (100), Grease-oils, non fossil (150) and BOD5 (300).
  Total emission (kg): Dissolved solids (0.002173552), Suspended solids (0.000894992), Nitrogen-as N (0.00022), Phosphorus-as P (0.00005), Chloride (0.00026), Grease-oils, non fossil (0.00038) and BOD5 (0.00077).
  Reference:Wastewater treatment and use in agriculture - FAO irrigation and drainage paper 47, Chapter 1, Wastewater characteristics and effluent quality parameters, accessed at: http://www.fao.org/docrep/t0551e/t0551e03.htm#TopOfPage on 13 of April 2018.
- COD, Chemical Oxygen Demand [water, surface water]: 0.00113842 kg; name cod; = 1.5*bod5
  It is assumed that COD is 1.5 times BOD5.
- Chloride [water, surface water]: 0.000256267 kg
  (same comment as for BOD5, Biological Oxygen Demand)
- DOC, Dissolved Organic Carbon [water, surface water]: 0.000421635 kg; = toc
  assumed TOC=DOC
- Dissolved solids [water, surface water]: 0.00213884 kg
  (same comment as for BOD5, Biological Oxygen Demand)
- Nitrogen [water, surface water]: 0.000216841 kg
  (same comment as for BOD5, Biological Oxygen Demand)
- Oils, non-fossil [water, surface water]: 0.000374544 kg
  (same comment as for BOD5, Biological Oxygen Demand)
- Phosphorus [water, surface water]: 4.9282e-5 kg
  (same comment as for BOD5, Biological Oxygen Demand)
- Suspended solids, unspecified [water, surface water]: 0.00087722 kg
  (same comment as for BOD5, Biological Oxygen Demand)
- TOC, Total Organic Carbon [water, surface water]: 0.000421635 kg; name toc; = cod/2.7
  COD=2.7*TOC
- Water [water, surface water]: 0.0025204 m3
  80% disposed to a surface water body

## Sampling procedure
Extrapolated from IN data, uncertainty adjusted accordingly
