# treatment of sewage sludge, 70% water, WWT, WW from concrete production, municipal incineration

Dataset: EcoSpold 2, unit process
Geography: GLO
Time period: 2006-01-01 to 2022-12-31
Technology level: current
Classification: ISIC rev.4 ecoinvent: 3821:Treatment and disposal of non-hazardous waste
Scenario: Business-as-Usual
System model: Allocation at the point of substitution
Generated by: Nikolia Stoikou
Database: ecoinvent
isCopyrightProtected: true

## General comment
The process represents the treatment of a waste (sewage sludge) that is exclusively produced from another waste treatment. Municipal incineration is the controlled combustion of a waste. Sewage sludge is generated in the wastewater treatment of 'wastewater from concrete production'. Recommended use of this dataset: to be used within the specific chain of treatments for 'wastewater from concrete production'. Share of biogenic carbon in the sludge: 0%.

## Included activities start
The activity starts with the waste being available at the gate of the treatment facility. Collection and transportation of the waste to the treatment plant is not included.

## Included activities end
The activity ends with the waste being treated and waste-specific emissions from the incineration process are released to the environment (air and water).

## Geography
Modelling parameters affecting the treatment technology are not specific to this geography.

## Technology
The waste is treated in the incineration plant with flue gas cleaning. Incineration is the controlled combustion of a waste. Auxiliary material consumption for this step of air pollution control (APC) are included in the process. Infrastructure is also included in the process. Air polution control includes, electrostatic precipitator for fly ash (ESP), wet flue gas scrubber and 25% SNCR , 42.77% SCR-high dust , 32.68% SCR-low dust -DeNOx facilities and 0% without DeNOx (weighted according to mass of burnt waste). Efficiency of iron scrap separation from slag : 58%. Efficiency of aluminium scrap separation from slag : 31%. Efficiency of copper scrap separation from slag : 31%. Gross electric efficiency technology mix 15.84% and Gross thermal efficiency technology mix 28.51%

## Reference product
- heat, for reuse in municipal waste incineration only: 1 MJ; By-product classification allocatable product; CPC 17300: Steam and hot water; lognormal variance with pedigree 0.47309, pedigree (1,1,1,1,1)
  net useful heat generated from this waste and used in internal MSWI plant energy redistribution.
  Uncertainty: uncertainty is calculated from uncertainties in waste composition and uncertainties in energy efficiency and the uncertainty in internal energy demand
  production volume 393738 MJ
    Calculated from the production volume of the reference product in proportion to the respective output amounts.
  property price 0.0106 EUR2005
    Average European district heat price from Ecoheatcool and Euroheat 2005-2006, Ecoheat Work package 1: The European heat market. Final report. 10.6 EUR/GJ i s the price of district heat. http://www.solarthermalworld.org/files/Ecoheatcool%20WP1%20Web.pdf?download
  properties: carbon allocation 0 kg, carbon content 0

## Inputs from technosphere
- acetic acid, without water, in 98% solution state: 3.38716e-6 kg
- alkylbenzene sulfonate, linear, petrochemical: 8.83e-6 kg
- aluminium, cast alloy: 4.45478e-7 kg
- anhydrite: 4.93849e-6 kg
- cement, ART: 4.63637e-6 kg
- cement, CEM II/A: 6.16002e-8, 5.91903e-5, 4.11269e-6, 2.9192e-8 kg (4 suppliers, which the file names only by identifier); sum of these 6.33938e-5 kg
- cement, CEM II/B: 3.31445e-5, 8.67432e-6, 0.00046875 kg (3 suppliers, which the file names only by identifier); sum of these 0.000510569 kg
- cement, CEM II/B-V: 1.71442e-5 kg
- cement, CEM III/A: 0.000467563, 1.95385e-7, 0.00672839, 7.5607e-6 kg (4 suppliers, which the file names only by identifier); sum of these 0.00720371 kg
- cement, CP II-E: 0.000129918 kg
- cement, CP II-F: 6.72537e-5 kg
- cement, CP III: 0.00102332 kg
- cement, Portland: 0.000571788, 7.9149e-6, 1.192e-5, 1.3217e-5, 0.000404099, 0.000221525, 7.81595e-5, 0.00585916, 8.72985e-7 kg (9 suppliers, which the file names only by identifier); sum of these 0.00716866 kg
- cement, type ICo: 2.18714e-5 kg
- cement, type IP: 2.29129e-5 kg
- cement, type general use: 1.59644e-5 kg
- chemical, organic: 7.21748e-5 kg
- clay pit infrastructure: 7.73673e-14 unit
- concrete mixing factory: 2.47681e-11 unit
- concrete, 25-30MPa: 1.59002e-7 m3
- concrete, 25MPa: 1.15701e-8, 5.00983e-9, 1.9262e-6, 2.33964e-9, 7.92112e-8, 7.79481e-8 m3 (6 suppliers, which the file names only by identifier); sum of these 2.10228e-6 m3
- diesel, burned in building machine: 0.00056644 MJ
- electricity, medium voltage: 2.16466e-6, 2.92284e-6, 4.2036e-6, 8.7747e-7, 7.39501e-5, 5.13963e-5, 0.000277563, 2.77582e-6, 1.41718e-12, 1.03945e-6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 kWh (78 suppliers, which the file names only by identifier); sum of these 0.00169067 kWh
- ethylene oxide: 9.32674e-6, 4.22189e-6 kg (2 suppliers, which the file names only by identifier); sum of these 1.35486e-5 kg
- expanded clay: 0.000150825 kg
- fatty alcohol: 5.85238e-8 kg
- gravel, crushed: 7.40352e-6, 0.00642715, 0.0218821, 0.000112136, 0.00623949 kg (5 suppliers, which the file names only by identifier); sum of these 0.0346683 kg
- gravel, round: 0.0266045, 6.45163e-6 kg (2 suppliers, which the file names only by identifier); sum of these 0.0266109 kg
- gypsum, mineral: 3.66912e-6 kg
- heat, central or small-scale, other than natural gas: 4.96892e-6, 6.56977e-5 MJ (2 suppliers, which the file names only by identifier); sum of these 7.06666e-5 MJ
- heat, district or industrial, natural gas: 6.7249e-5, 1.93231e-5, 0.000258835, 1.35574e-6 MJ (4 suppliers, which the file names only by identifier); sum of these 0.000346763 MJ
- heat, district or industrial, other than natural gas: 9.22519e-5, 0.0002742, 0.00121973 MJ (3 suppliers, which the file names only by identifier); sum of these 0.00158618 MJ
- lubricating oil: 5.06534e-6, 9.52398e-7 kg (2 suppliers, which the file names only by identifier); sum of these 6.01774e-6 kg
- municipal solid waste: -4.56423e-11, -2.63064e-9, -9.84107e-12, -3.228e-8, -1.15007e-11 kg (5 suppliers, which the file names only by identifier); sum of these -3.49777e-8 kg
- packing, clay product: 0.000463277 kg
- quicklime, milled, packed: 2.63493e-5 kg
- reinforcing steel: 0.00018273 kg
- sand: 0.00328649, 0.000549875, 7.25154e-6, 0.0412095 kg (4 suppliers, which the file names only by identifier); sum of these 0.0450531 kg
- scrap steel: -1.68257e-10, -5.12833e-7, -1.32803e-7 kg (3 suppliers, which the file names only by identifier); sum of these -6.45805e-7 kg
- steel, low-alloyed, hot rolled: 1.29724e-6 kg
- synthetic rubber: 1.12072e-6 kg
- tap water: 2.45267e-5, 0.00463063, 0.00169664, 6.1385e-5, 0.00937764, 9.04414e-5, 0.00743085, 0.000117466, 8.32812e-5, 0.000956592 kg (10 suppliers, which the file names only by identifier); sum of these 0.0244694 kg
- waste concrete: -6.43853e-7, -0.00289739, -0.000182105 kg (3 suppliers, which the file names only by identifier); sum of these -0.00308014 kg
- waste mineral oil: -7.77053e-9, -1.03236e-6, -3.13884e-7 kg (3 suppliers, which the file names only by identifier); sum of these -1.35402e-6 kg
- waste rubber, unspecified: -1.62616e-8, -3.87366e-7, -5.33175e-7 kg (3 suppliers, which the file names only by identifier); sum of these -9.36803e-7 kg
- wastewater from concrete production: -2.20194e-8, -5.31365e-6 m3 (2 suppliers, which the file names only by identifier); sum of these -5.33567e-6 m3
- wastewater, unpolluted: -2.86528e-8, -6.37534e-6 m3 (2 suppliers, which the file names only by identifier); sum of these -6.40399e-6 m3

## Inputs from nature
- Water, unspecified natural origin [natural resource, in water]: 4.26782e-6 m3

## Emissions to nature
- Carbon dioxide, fossil [air, non-urban air or from high stacks]: 2.00779e-6 kg
- Water [air, unspecified]: 2.25729e-6 m3
- Chlorides, unspecified [water, unspecified]: 8.45766e-14 kg
- Copper ion [water, unspecified]: 4.24252e-13 kg
- Iron ion [water, unspecified]: 4.24252e-13 kg
- Oils, unspecified [water, unspecified]: 6.35009e-12 kg
- Suspended solids, unspecified [water, unspecified]: 1.27002e-11 kg
- Water [water, unspecified]: 5.20331e-6 m3

## Extrapolations
Modelling parameters are based on an average municipal solid waste incineration plant in Switzerland for the year of 2010 (grate incinerators).
