# treatment of used cable

Dataset: EcoSpold 2, unit process
Geography: GLO
Time period: 2005-01-01 to 2022-12-31
Technology level: current
Classification: ISIC rev.4 ecoinvent: 3830:Materials recovery
Tags: ConvertedDataset
Scenario: Business-as-Usual
System model: Allocation at the point of substitution
Generated by: Roland Hischier
Published in: Hischier R. 2007
Database: ecoinvent
isCopyrightProtected: true

## General comment
The multioutput-process 'mechanical separation of copper containing cables' delivers the co-products 'disposal, treatment of cables” and 'copper, from cable treatment, in secondary production, at plant'. The allocation is done 100% to the disposal process.

## Included activities end
This dataset represents the treatment of waste cable from electric and electronic devices. It includes infrastructure, energy consumption, and an estimation of the efforts for transportation. The process has no emissions to air / water.

## Geography
Data from a European cable recycling company - used as global average data.

## Technology
Shredder, followed by a modern grinding machine with current separation technology

## Reference product
- copper, cathode: 1 kg; name copper_amount; By-product classification allocatable product; CPC 41413: Refined copper and copper alloys, unwrought; master alloys of copper; CAS 7440-50-8
  production volume 2.81858e8 kg
    Estimated value. Assumed that cables represent 6% of total copper scrap (based on the amout of 'unalloyed copper' recovered annually in the US).Source: USGS Minerals Yearbook 2015. Available from: https://www.usgs.gov/centers/nmic/copper-statistics-and-information (downloaded 21 June 2019), Table 6.
  property price 3.57105 EUR2005
    Price calculated as 5-year market average (2015-2019; USD/kg; USGS [2020]) and converted to EUR2005 (USD2019/EUR2005 exchange rate: 0.62; Official Data Foundation [2020] and Macrotrends [2020]).
    References:
    Official Data Foundation (2020). Inflation Calculator [Online]. Available from: https://www.officialdata.org/us/inflation/2005?endYear=2019&amount=1 [Accessed 28/07/2020]
    USGS (2020). Mineral Commodity Summaries 2020 [Online]. Available from: https://pubs.usgs.gov/periodicals/mcs2020/mcs2020.pdf [Accessed 28/07/2020]
    Macrotrends (2020). Euro Dollar Exchange Rate (EUR USD) - Historical Chart [Online]. Available from: https://www.macrotrends.net/2548/euro-dollar-exchange-rate-historical-chart [Accessed 28/07/2020]
  properties: carbon allocation 0 kg, carbon content 0, carbon content, fossil 0, carbon content, non-fossil 0, dry mass 1 kg, water content 0, water in wet mass 0 kg, wet mass 1 kg

## Inputs from technosphere
- acrylonitrile-butadiene-styrene copolymer: 0.0656502 kg
- air compressor, screw-type compressor, 4kW: 2.5685e-6 unit
- alkyd paint, white, without solvent, in 60% solution state: 1.08914e-6 kg
- alkyd paint, white, without water, in 60% solution state: 1.89206e-7, 8.98187e-7 kg (2 suppliers, which the file names only by identifier); sum of these 1.08739e-6 kg
- aluminium scrap, post-consumer: -1.73904e-5 kg
- aluminium scrap, post-consumer, prepared for melting: -4.7682e-12 kg
- aluminium, cast alloy: 0.019299 kg
- aluminium, wrought alloy: 0.000951926 kg
- battery, Li-ion, NCA, rechargeable, prismatic: 0.000630377 kg
- brass: 0.000170653, 8.57555e-7 kg (2 suppliers, which the file names only by identifier); sum of these 0.000171511 kg
- building, hall: 7.42791e-6 m2
- building, hall, steel construction: 2.42616e-6 m2
- building, multi-storey: 2.33528e-6, 1.15331e-6 m3 (2 suppliers, which the file names only by identifier); sum of these 3.48859e-6 m3
- cable, connector for computer, without plugs: 0.00587054 m
- cable, printer cable, without plugs: 0.00403724 m
- cable, ribbon cable, 20-pin, with plugs: 2.21857e-6 kg
- cable, three-conductor cable: 0.000111597 m
- cable, unspecified: 0.00359473 kg
- carbon dioxide, liquid: 7.4286e-6, 1.56374e-6 kg (2 suppliers, which the file names only by identifier); sum of these 8.99234e-6 kg
- cast iron: 0.00314663 kg
- casting, brass: 1.72689e-6 kg
- ceramic tile: 8.99175e-5 kg
- chemical factory: 0.00020691, 0.000102185 kg (2 suppliers, which the file names only by identifier); sum of these 0.000309094 kg
- compressed air, 1000 kPa gauge: 0.00810979, 0.00330004 m3 (2 suppliers, which the file names only by identifier); sum of these 0.0114098 m3
- concrete block: 0.000601513, 4.74895e-6, 1.04847e-5 kg (3 suppliers, which the file names only by identifier); sum of these 0.000616747 kg
- concrete, normal strength: 2.09661e-8, 4.42883e-9, 2.99468e-9, 4.41853e-8, 4.60405e-9, 2.68905e-6, 3.7273e-8, 1.58068e-6, 1.24687e-8, 7.22676e-9 m3 (10 suppliers, which the file names only by identifier); sum of these 4.40387e-6 m3
- copper, cathode: 0.00847572 kg
- corrugated board box: 0.000685522, 0.00159117, 0.000622534, 2.55357e-5 kg (4 suppliers, which the file names only by identifier); sum of these 0.00292476 kg
- decommissioned chemical production facilities: -0.000309094 kg
- drawing of pipe, steel: 0.000177694 kg
- electric connector, peripheral type buss: 2.29052e-5 kg
- electricity, high voltage: 0.414485 kWh
- electricity, low voltage: 4.60555e-5, 9.12712e-5, 0.000876757, 1.564e-5, 0.00031335, 2.8442e-6, 0.000217202, 6.39605e-5 kWh (8 suppliers, which the file names only by identifier); sum of these 0.00162708 kWh
- electricity, medium voltage: 0.0566014, 2.28574e-5, 4.3188e-5, 0.000102238, 8.01881e-5, 1.28614e-6, 6.5624e-6, 8.55643e-6, 0.000396253, 2.45227e-5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 kWh (11 suppliers, which the file names only by identifier); sum of these 0.0573087 kWh
- electronic component, passive, mobile, earpiece and speaker: 2.20918e-5 kg
- electronic component, passive, unspecified: 0.000215713 kg
- electronics scrap: -7.11583e-12 kg
- electronics scrap from control units: -8.85923e-5 kg
- electronics, for control units: 0.00018159 kg
- energy and auxilliary inputs, metal working factory: 1.3515e-10, 3.01383e-11 kg (2 suppliers, which the file names only by identifier); sum of these 1.65289e-10 kg
- epoxy resin, liquid: 0.000533843, 0.000112456 kg (2 suppliers, which the file names only by identifier); sum of these 0.0006463 kg
- excavation, hydraulic digger: 1.52479e-5 m3
- extrusion, plastic pipes: 0.000186448 kg
- fan, for power supply unit, desktop computer: 8.47183e-6 kg
- ferrite: 2.03869e-7 kg
- flat glass, coated: 1.54041e-5, 3.11913e-5 kg (2 suppliers, which the file names only by identifier); sum of these 4.65954e-5 kg
- flat glass, uncoated: 0.0009484, 0.00460553 kg (2 suppliers, which the file names only by identifier); sum of these 0.00555393 kg
- glass fibre: 0.000259121 kg
- glass fibre reinforced plastic, polyamide, injection moulded: 0.000131947 kg
- glass fibre reinforced plastic, polyester resin, hand lay-up: 9.34198e-6 kg
- glass from used cathode ray tube: -1.0843e-10 kg
- glass wool mat: 0.000117749 kg
- heat, central or small-scale, other than natural gas: 0.00498369, 6.84514e-5 MJ (2 suppliers, which the file names only by identifier); sum of these 0.00505215 MJ
- heat, district or industrial, natural gas: 2.54572e-8, 0.0460366, 0.000474372, 7.79515e-6 MJ (4 suppliers, which the file names only by identifier); sum of these 0.0465188 MJ
- heat, district or industrial, other than natural gas: 0.000508718, 2.68715e-8, 2.3568e-7, 0.0593927 MJ (4 suppliers, which the file names only by identifier); sum of these 0.0599017 MJ
- inductor, miniature radio frequency chip: 7.25533e-7 kg
- industrial furnace, 1MW, oil: 2.1312e-11 unit
- inert waste: -0.000136043, -1.17169e-6, -0.000479533 kg (3 suppliers, which the file names only by identifier); sum of these -0.000616747 kg
- inert waste, for final disposal: -0.000176079 kg
- injection moulding: 0.00657734 kg
- integrated circuit, logic type: 4.46628e-6 kg
- integrated circuit, memory type: 4.82955e-6 kg
- kraft paper: 0.00356385, 0.000445005 kg (2 suppliers, which the file names only by identifier); sum of these 0.00400886 kg
- liquid crystal display, unmounted, mobile device: 0.000737865 kg
- lubricating oil: 0.00130578, 0.000274869 kg (2 suppliers, which the file names only by identifier); sum of these 0.00158065 kg
- magnesium: 0.000173601 kg
- magnesium-alloy, AZ91, diecast: 0.000200701 kg
- maintenance, refrigeration machine: 6.19982e-6 unit
- medium density fibreboard: 1.99857e-7, 1.27997e-6 m3 (2 suppliers, which the file names only by identifier); sum of these 1.47983e-6 m3
- metal working factory: 1.65289e-10 unit
- metal working, average for aluminium product manufacturing: 0.000720652 kg
- metal working, average for copper product manufacturing: 5.03196e-5 kg
- metal working, average for steel product manufacturing: 0.000882135 kg
- nylon 6: 0.000206428, 0.000101946 kg (2 suppliers, which the file names only by identifier); sum of these 0.000308374 kg
- packaging film, low density polyethylene: 7.89505e-5 kg
- paper machine: 2.51674e-12, 5.09608e-12 unit (2 suppliers, which the file names only by identifier); sum of these 7.61281e-12 unit
- photovoltaic cell factory: 4.21396e-11 unit
- pipeline, natural gas, low pressure distribution network: 5.24569e-10 km
- pipeline, petroleum: 2.72173e-10, 5.51117e-10 km (2 suppliers, which the file names only by identifier); sum of these 8.2329e-10 km
- plug, inlet and outlet, for computer cable: 0.00327828 unit
- plug, inlet and outlet, for printer cable: 0.00224291 unit
- plywood: 4.89729e-7, 1.03907e-5 m3 (2 suppliers, which the file names only by identifier); sum of these 1.08805e-5 m3
- polycarbonate: 0.000211905 kg
- polyethylene terephthalate, granulate, amorphous: 6.59575e-6 kg
- polyethylene, high density, granulate: 0.000235007 kg
- polyethylene, low density, granulate: 0.000616747 kg
- polypropylene, granulate: 0.0230886 kg
- polystyrene foam slab: 0.000612405 kg
- polystyrene, general purpose: 0.00154187 kg
- polystyrene, high impact: 0.00634744 kg
- polyurethane, rigid foam: 3.01479e-5, 6.10458e-5 kg (2 suppliers, which the file names only by identifier); sum of these 9.11937e-5 kg
- polyvinylchloride, bulk polymerised: 0.0174157 kg
- polyvinylchloride, emulsion polymerised: 2.68135e-6 kg
- polyvinylchloride, suspension polymerised: 1.83225e-5 kg
- power adapter, for laptop: 0.000298626 unit
- power adapter, for smartphone: 0.0115703 unit
- printed paper: 0.00046256 kg
- printed wiring board, mounted mainboard, laptop computer, Pb free: 6.75935e-5 kg
- printed wiring board, mounted mainboard, mobile device, double-sided, Pb free: 3.60761e-5 m2
- printed wiring board, surface mounted, unspecified, Pb free: 0.000217373 kg
- railway track: 2.04e-7 m*year
- refractory, fireclay, packed: 0.000174679 kg
- refrigerant R134a: 1.89068e-5 kg
- reinforcing steel: 0.000287099 kg
- residue from mechanical treatment, cathode ray tube display: -2.75609e-11, -4.16377e-13 kg (2 suppliers, which the file names only by identifier); sum of these -2.79772e-11 kg
- road: 0.000119122 m*year
- road, company, internal: 1.39046e-5 m2*year
- scrap aluminium: -0.00610587, -0.000286085, -0.0128565 kg (3 suppliers, which the file names only by identifier); sum of these -0.0192484 kg
- scrap copper: -0.000118984, -0.00256214, -0.00539482 kg (3 suppliers, which the file names only by identifier); sum of these -0.00807595 kg
- scrap steel: -5.90813e-5, -0.14787, -0.047614 kg (3 suppliers, which the file names only by identifier); sum of these -0.195543 kg
- seal, natural rubber based: 0.000135664 kg
- section bar extrusion, aluminium: 0.000213741 kg
- sheet rolling, aluminium: 9.51587e-5 kg
- sheet rolling, chromium steel: 0.000816065 kg
- sheet rolling, copper: 0.000128009 kg
- sheet rolling, steel: 0.00207064 kg
- steam, in chemical industry: 0.000633225, 0.00359149 kg (2 suppliers, which the file names only by identifier); sum of these 0.00422472 kg
- steel, chromium steel 18/8: 0.000816065 kg
- steel, chromium steel 18/8, hot rolled: 0.00474039 kg
- steel, low-alloyed: 0.0953084 kg
- steel, low-alloyed, hot rolled: 0.0992955 kg
- stone wool: 7.10271e-5 kg
- stretch blow moulding: 0.000140406 kg
- synthetic rubber: 0.00414119 kg
- tap water: 1.7891 kg
- toner module, laser printer, black/white: 0.00112146 unit
- toner module, laser printer, colour: 0.00112146 unit
- trisodium phosphate: 0.00160478 kg
- used cable: -0.00377446 kg
- used laptop computer: -0.000820102 kg
- used printed wiring boards: -0.000217373 kg
- used printer, laser: -0.0131659 kg
- used refrigeration machine, R134a as refrigerant: -4.20152e-6 unit
- used refrigeration machine, carbon dioxide, liquid as refrigerant: -1.9983e-6 unit
- used smartphone: -0.00174976 kg
- used tablet: -0.000252974 kg
- waste concrete: -4.70111e-7, -0.00230655, -0.000165095 kg (3 suppliers, which the file names only by identifier); sum of these -0.00247211 kg
- waste concrete, not reinforced: -2.44281e-5, -2.58834e-7, -0.000305109 kg (3 suppliers, which the file names only by identifier); sum of these -0.000329796 kg
- waste electric and electronic equipment: -0.00018963 kg
- waste glass: -1.81189e-5, -4.34011e-5, -0.000470892, -4.04926e-6, -0.000894472, -6.14902e-6, -0.00443775, -9.84624e-7 kg (8 suppliers, which the file names only by identifier); sum of these -0.00587582 kg
- waste mineral oil: -1.07346e-5, -0.00113604, -0.000433876 kg (3 suppliers, which the file names only by identifier); sum of these -0.00158065 kg
- waste mineral wool, for final disposal: -0.000107395, -8.12633e-5 kg (2 suppliers, which the file names only by identifier); sum of these -0.000188658 kg
- waste packaging paper: -0.00253064, -0.000103297, -0.000158379, -4.93498e-13, -0.000572291, -0.00103716, -1.38488e-5, -5.58031e-5 kg (8 suppliers, which the file names only by identifier); sum of these -0.00447142 kg
- waste paint on metal: -7.35272e-7, -6.24123e-9 kg (2 suppliers, which the file names only by identifier); sum of these -7.41513e-7 kg
- waste paint on wall: -3.45879e-7 kg
- waste plastic, consumer electronics: -1.54139e-11, -2.32865e-13 kg (2 suppliers, which the file names only by identifier); sum of these -1.56468e-11 kg
- waste plastic, mixture: -0.00728509, -3.6813e-5, -8.12219e-5, -0.00631386, -0.0509996, -0.000486761, -0.000190916, -0.00020105 kg (8 suppliers, which the file names only by identifier); sum of these -0.0655953 kg
- waste polyethylene: -0.000122051, -7.05937e-6, -3.19851e-6, -0.000854422, -8.15496e-6, -6.16746e-7, -3.36829e-6, -1.36075e-6, -9.84401e-5 kg (9 suppliers, which the file names only by identifier); sum of these -0.00109867 kg
- waste polyethylene/polypropylene product: -6.116e-5, -2.41249e-5, -7.23927e-7 kg (3 suppliers, which the file names only by identifier); sum of these -8.60089e-5 kg
- waste polypropylene: -2.85232e-5, -0.00221727, -1.29278e-5, -0.0179098, -7.06039e-5, -0.000170939, -6.7045e-5, -0.00255835 kg (8 suppliers, which the file names only by identifier); sum of these -0.0230355 kg
- waste polystyrene: -6.19012e-6, -0.00165358, -2.63348e-6, -0.000236207, -6.51871e-6, -1.1936e-6, -1.57824e-5, -0.000204716 kg (8 suppliers, which the file names only by identifier); sum of these -0.00212682 kg
- waste polystyrene isolation, flame-retardant: -7.76586e-6, -1.96875e-5 kg (2 suppliers, which the file names only by identifier); sum of these -2.74534e-5 kg
- waste polyvinylchloride: -1.00748e-5, -5.22487e-5, -2.22283e-5, -5.50222e-5, -0.000133214, -0.00199374, -0.00172789, -0.0139573 kg (8 suppliers, which the file names only by identifier); sum of these -0.0179517 kg
- waste reinforced concrete: -0.000519157, -5.50087e-6, -0.00740928 kg (3 suppliers, which the file names only by identifier); sum of these -0.00793394 kg
- waste rubber, unspecified: -8.71366e-5, -0.00207568, -0.00207568 kg (3 suppliers, which the file names only by identifier); sum of these -0.0042385 kg
- waste wood, untreated: -3.60056e-6, -3.30366e-5, -4.92477e-5, -0.00526208, -2.08971e-5, -0.000625953, -0.000138322, -0.000396631 kg (8 suppliers, which the file names only by identifier); sum of these -0.00652977 kg
- wastewater treatment facility, capacity 1.6E8l/year: 1.42364e-11 unit
- wastewater, average: -1.70669e-7, -1.01115e-7, -2.84001e-5, -6.79105e-6 m3 (4 suppliers, which the file names only by identifier); sum of these -3.5463e-5 m3
- wastewater, unpolluted: -8.18504e-6, -0.00169257 m3 (2 suppliers, which the file names only by identifier); sum of these -0.00170075 m3
- welding, arc, steel: 5.60158e-5 m
- wire drawing, copper: 0.000562439 kg
- wire drawing, steel: 4.4329e-5 kg
- zinc: 2.99359e-6 kg
- zinc coat, pieces: 0.000125575 m2

## Inputs from nature
- Occupation, construction site [natural resource, land]: 6.5707e-6 m2*year
- Occupation, dump site [natural resource, land]: 6.97848e-5 m2*year
- Occupation, industrial area [natural resource, land]: 0.00151204 m2*year
- Occupation, traffic area, road network [natural resource, land]: 0.000163996 m2*year
- Transformation, from pasture, man made [natural resource, land]: 1.10722e-5 m2
- Transformation, from unspecified [natural resource, land]: 2.55032e-5 m2
- Transformation, to dump site, residual material landfill [natural resource, land]: 6.97848e-7 m2
- Transformation, to industrial area [natural resource, land]: 3.42374e-5 m2
- Transformation, to traffic area, road network [natural resource, land]: 1.63996e-6 m2
- Water, well, in ground [natural resource, in water]: 5.09141e-5 m3

## Emissions to nature
- Water [air, unspecified]: 0.000110078 m3

## Sampling procedure
Company information & own estimation

## Extrapolations
see Geography & Technology
