# treatment of raw sewage sludge, municipal incineration

Dataset: EcoSpold 2, unit process
Geography: CH
Time period: 1994-01-01 to 2022-12-31
Technology level: outdated
Classification: EcoSpold01Categories: waste management/municipal incineration
Classification: ISIC rev.4 ecoinvent: 3821:Treatment and disposal of non-hazardous waste
Synonyms: unfermented sewage sludge; Unvergärter Rohschlamm der Kläranlage
Tags: ConvertedDataset; Treatment
Scenario: Business-as-Usual
System model: Allocation at the point of substitution
Generated by: Gabor Doka (obsolete)
Published in: Jungbluth N. 2007
Database: ecoinvent
isCopyrightProtected: true

## General comment
Incinerated amount = 0.1793kg. Functional unit refers to 1 kilogram wet sludge with 95% water. Incinerated waste contains 100% raw sludge, 73% H2O; .
waste composition (wet, in ppm): upper heating value 5.077 MJ/kg; lower heating value 3.196 MJ/kg; H2O 730000; O 61097; H 13886; C 111090; S 5191.6; N 11827; P 5613.7; B n.a.; Cl n.a.; Br n.a.; F n.a.; I n.a.; Ag n.a.; As 0.50992; Ba n.a.; Cd 0.36239; Co 2.0891; Cr 15.796; Cu 72.712; Hg 0.36239; Mn 68.441; Mo 1.2364; Ni 6.8001; Pb 20.145; Sb n.a.; Se n.a.; Sn 5.1856; V n.a.; Zn 198.1; Be n.a.; Sc n.a.; Sr n.a.; Ti n.a.; Tl n.a.; W n.a.; Si 7705.6; Fe 34796; Ca 13075; Al 3862.6; K n.a.; Mg 1468; Na n.a.;
Share of carbon in waste that is biogenic 100%.
Share of iron in waste that is metallic/recyclable 0%.
Net energy produced in MSWI: 0MJ/kg waste electric energy and 0MJ/kg waste thermal energy

One kg of this waste produces 0.1032 kg of slag and 0.01711 kg of residues, which are landfilled. Additional solidification with 0.006845 kg of cement.
[This dataset was already contained in the ecoinvent database version 2. It was not individually updated during the transfer to ecoinvent version 3. Life Cycle Impact Assessment results may still have changed, as they are affected by changes in the supply chain, i.e. in other datasets. This dataset was generated following the ecoinvent quality guidelines for version 2. It may have been subject to central changes described in the ecoinvent version 3 change report (http://www.ecoinvent.org/database/ecoinvent-version-3/reports-of-changes/), and the results of the central updates were reviewed extensively. The changes added e.g. consistent water flows and other information throughout the database. The documentation of this dataset can be found in the ecoinvent reports of version 2, which are still available via the ecoinvent website. The change report linked above covers all central changes that were made during the conversion process.]

## Included activities end
dewatering of sludge. treatment of dewatering liquid. transport of dewatered sludge to incinerator. waste-specific air and water emisions from incineration, auxiliary material consumption for flue gas cleaning. Short-term emissions to river water and long-term emisisons to ground water from slag compartment (from bottom slag) and residual material landfill (from solidified fly ashes and scrubber slugde). Process energy demands for MSWI.

## Geography
Specific to the technology mix encountered in Switzerland in 2000. Well applicable to modern incineration practices in Europe, North America or Japan.

## Technology
replaced by newer incineration technology with fly ash extraction. Average Swiss MSWI plants in 2000 (grate incinerators) with electrostatic precipitator for fly ash (ESP), wet flue gas scrubber and 29.4% SNCR , 32.2% SCR-high dust , 24.6% SCR-low dust -DeNOx facilities and 13.8% without Denox (by burnt waste, according to Swiss average). Gross electric efficiency technology mix 12.997% and Gross thermal efficiency technology mix 25.57%

## Time period
Waste composition as given in literature reference. Transfer coefficients for modern Swiss MSWI. Emission speciation based on early 90ies data.

## Parameters
- fraction, process water, to air: 1 dimensionless; name fraction_PW_to_air; lognormal variance with pedigree 0.092025, pedigree (4,4,3,2,4)
  Calculated value. During incineration all water incorporated in the products entering the incinerator evaporate to air.

## Reference product
- raw sewage sludge: -1 kg; By-product classification Waste; CPC 39920: Sewage sludge
  production volume 0 kg
    outdated. Replaced by newer incineration technology with fly ash extraction.
  property heating value, net 3.2 MJ
    Value taken from the general comment of the treatment dataset.
  property price 0 EUR2005
    Waste products are assigned a price of zero as they are assumed to require further treatment.
  properties: carbon allocation 0.02048 kg, carbon content 0.4096, carbon content, fossil 0, carbon content, non-fossil 0.4096, dry mass 0.05 kg, water content 19, water in wet mass 0.95 kg, wet mass 1 kg

## Inputs from technosphere
- aluminium sulfate, powder: 1.7171e-5 kg; lognormal variance with pedigree 0.09, pedigree (1,1,5,1,1)
  burden from treatment of dewatering liquid, uncertainty calculated from waste composition and treatment model
  properties: dry mass 1 kg, wet mass 1 kg
- ammonia, anhydrous, liquid: 0.00010699 kg; lognormal variance with pedigree 1.3, pedigree (1,1,5,1,1)
  burden from municipal incineration, uncertainty calculated from waste composition and treatment model
  properties: dry mass 1 kg, wet mass 1 kg
- cement, unspecified: 0.0012274 kg; lognormal variance with pedigree 0.09, pedigree (1,1,5,1,1)
  (same comment as for ammonia, anhydrous, liquid)
  properties: dry mass 1 kg, wet mass 1 kg
- chemical, inorganic: 6.4007e-7 kg; lognormal variance with pedigree 0.19, pedigree (1,1,5,1,1)
  (same comment as for ammonia, anhydrous, liquid)
  properties: carbon content, fossil 0.003, dry mass 1 kg, wet mass 1 kg
  note on carbon content, fossil: This dataset is an unweighted average of 20 inorganic substances (listed in Tab 88.1, ecoinvent v2.2 report 8, part II), being part of the top100 chemicals included in this database. The C-content has also been calculated as an unweighted average of the C content of the substances composing this dataset.
- chemical, organic: 0.0002629 kg; lognormal variance with pedigree 0.04, pedigree (1,1,5,1,1)
  burden from dewatering process, municipal incineration, uncertainty calculated from waste composition and treatment model
  properties: carbon content, fossil 0.628, dry mass 1 kg, heating value, net 19.03 MJ, wet mass 1 kg
  note on carbon content, fossil: This dataset is an unweighted average of 20 organic substances (listed in Tab 88.1, ecoinvent v2.2 report 8, part II), being part of the top100 chemicals included in this database. The C-content has also been calculated as an unweighted average of the C content of the substances composing this dataset.
- chromium oxide, flakes: 6.25e-8 kg; lognormal variance with pedigree 2.01, pedigree (1,1,5,1,1)
  (same comment as for ammonia, anhydrous, liquid)
  properties: dry mass 1 kg, wet mass 1 kg
- electricity, for reuse in municipal waste incineration only: 0.0050908 kWh; name E_el_prod_MSWI; lognormal variance with pedigree 0.04, pedigree (1,1,5,1,1)
  (same comment as for ammonia, anhydrous, liquid)
- electricity, low voltage: 0.0055286 kWh; lognormal variance with pedigree 0.07, pedigree (1,1,5,1,1)
  burden from dewatering process, treatment of dewatering liquid, uncertainty calculated from waste composition and treatment model
- heat, district or industrial, natural gas: 0.0093906 MJ; lognormal variance with pedigree 1.3, pedigree (1,1,5,1,1)
  (same comment as for ammonia, anhydrous, liquid)
  properties: heating value, net 1 MJ
- heat, for reuse in municipal waste incineration only: 0.0038581 MJ; name E_th_prod_MSWI; lognormal variance with pedigree 0.04, pedigree (1,1,5,1,1)
  (same comment as for ammonia, anhydrous, liquid)
- hydrochloric acid, without water, in 30% solution state: 3.8404e-7 kg; lognormal variance with pedigree 0.19, pedigree (1,1,5,1,1)
  (same comment as for ammonia, anhydrous, liquid)
  properties: dry mass 1 kg, heating value, net 3.32 MJ, wet mass 1 kg
- iron (III) chloride, without water, in 40% solution state: 0.0013411 kg; lognormal variance with pedigree 0.04, pedigree (1,1,5,1,1)
  burden from dewatering process, treatment of dewatering liquid, municipal incineration, uncertainty calculated from waste composition and treatment model
  properties: dry mass 1 kg, wet mass 1 kg
- iron sulfate: 6.3534e-5 kg; lognormal variance with pedigree 0.09, pedigree (1,1,5,1,1)
  (same comment as for aluminium sulfate, powder)
  properties: dry mass 1 kg, wet mass 1 kg
- municipal waste incineration facility: 4.4827e-11 unit; lognormal variance with pedigree 0.04, pedigree (1,1,5,1,1)
  (same comment as for ammonia, anhydrous, liquid)
- process-specific burdens, municipal waste incineration: 0.17931 kg; lognormal variance with pedigree 0.04, pedigree (1,1,5,1,1)
  burden from municipal incineration, uncertainty calculated from waste composition and treatment model;activityLink introduced to establish a direct link to the corresponding regional supply of this product
- process-specific burdens, residual material landfill: 0.0030686 kg; lognormal variance with pedigree 0.08, pedigree (1,1,5,1,1)
  (same comment as for process-specific burdens, municipal waste incineration)
- process-specific burdens, slag landfill: 0.018498 kg; lognormal variance with pedigree 0.1, pedigree (1,1,5,1,1)
  (same comment as for process-specific burdens, municipal waste incineration)
- pump station: 1e-11 unit; lognormal variance with pedigree 0.04, pedigree (1,1,5,1,1)
  burden from dewatering process, uncertainty calculated from waste composition and treatment model
  This exchange has an activity link directly to the producing activity because the product is primarily consumed in the same geographical area where it is produced.
- quicklime, milled, packed: 0.0023348 kg; lognormal variance with pedigree 0.04, pedigree (1,1,5,1,1)
  (same comment as for chemical, organic)
  properties: dry mass 0.99 kg, water content 0.010101, wet mass 1 kg
- residual material landfill: 6.3929e-12 unit; lognormal variance with pedigree 0.08, pedigree (1,1,5,1,1)
  (same comment as for ammonia, anhydrous, liquid)
- sewer grid, 5E9l/year, 110 km: 1.7876e-10 km; lognormal variance with pedigree 0.04, pedigree (1,1,5,1,1)
  (same comment as for aluminium sulfate, powder)
- slag landfill: 3.2885e-11 unit; lognormal variance with pedigree 0.1, pedigree (1,1,5,1,1)
  (same comment as for ammonia, anhydrous, liquid)
- sodium hydroxide, without water, in 50% solution state: 0.0003485 kg; lognormal variance with pedigree 0.29, pedigree (1,1,5,1,1)
  (same comment as for ammonia, anhydrous, liquid)
  properties: dry mass 1 kg, heating value, net 3.03 MJ, wet mass 1 kg
- titanium dioxide: 3.0625e-6 kg; lognormal variance with pedigree 2.01, pedigree (1,1,5,1,1)
  (same comment as for ammonia, anhydrous, liquid)
  properties: dry mass 1 kg, wet mass 1 kg
- waste cement, hydrated: -0.0030686 kg; lognormal variance with pedigree 0.05, pedigree (1,1,1,1,1)
  (same comment as for ammonia, anhydrous, liquid)
  production volume
    Calculated from the production volume of raw sewage sludge in proportion to the respective output amounts.
  properties: dry mass 1 kg, wet mass 1 kg
- waste graphical paper: -1.2721e-5 kg
  (same comment as for aluminium sulfate, powder)
  production volume
    (same comment as for waste cement, hydrated)
  properties: carbon content, non-fossil 0.454955, dry mass 0.888 kg, heating value, net 14.12 MJ, water content 0.126126, wet mass 1 kg
  note on heating value, net: Value taken from the general comment of the treatment dataset.
- waste plastic, mixture: -1.2721e-5 kg
  (same comment as for aluminium sulfate, powder)
  production volume
    (same comment as for waste cement, hydrated)
  properties: carbon content, fossil 0.747344, dry mass 0.847 kg, heating value, net 30.79 MJ, water content 0.180638, wet mass 1 kg
  note on carbon content, fossil: C content in 1 kg DM was calculated using data in Tab A.2, ecoinvent v2.2 report 13_I
- wastewater treatment facility, capacity 5E9l/year: 4.6682e-12 unit; lognormal variance with pedigree 0.04, pedigree (1,1,5,1,1)
  (same comment as for aluminium sulfate, powder)

## Emissions to nature
- Aluminium III [air, urban air close to ground]: 1.082e-6 kg; lognormal variance with pedigree 0.54, pedigree (1,1,5,1,1)
  emission from municipal incineration, uncertainty calculated from waste composition and treatment model
- Ammonia [air, urban air close to ground]: 1.6803e-6 kg; lognormal variance with pedigree 1.42, pedigree (1,1,5,1,1)
  (same comment as for Aluminium III)
- Arsenic ion [air, urban air close to ground]: 9.3261e-16 kg; lognormal variance with pedigree 1.81, pedigree (1,1,5,1,1)
  (same comment as for Aluminium III)
- Cadmium II [air, urban air close to ground]: 3.5783e-12 kg; lognormal variance with pedigree 1.78, pedigree (1,1,5,1,1)
  (same comment as for Aluminium III)
- Calcium [air, urban air close to ground]: 3.9084e-6 kg; lognormal variance with pedigree 0.39, pedigree (1,1,5,1,1)
  (same comment as for Aluminium III)
- Carbon dioxide, non-fossil [air, urban air close to ground]: 0.072598 kg; lognormal variance with pedigree 0.15, pedigree (1,1,5,1,1)
  emission from treatment of dewatering liquid, municipal incineration, uncertainty calculated from waste composition and treatment model
- Carbon monoxide, non-fossil [air, urban air close to ground]: 3.9968e-5 kg; lognormal variance with pedigree 0.69, pedigree (1,1,5,1,1)
  (same comment as for Aluminium III)
- Chromium III [air, urban air close to ground]: 2.0943e-13 kg; lognormal variance with pedigree 1.34, pedigree (1,1,5,1,1)
  (same comment as for Aluminium III)
- Cobalt II [air, urban air close to ground]: 1.1893e-14 kg; lognormal variance with pedigree 1.62, pedigree (1,1,5,1,1)
  (same comment as for Aluminium III)
- Copper ion [air, urban air close to ground]: 9.6243e-11 kg; lognormal variance with pedigree 1.1, pedigree (1,1,5,1,1)
  (same comment as for Aluminium III)
- Cyanide [air, urban air close to ground]: 1.9086e-6 kg; lognormal variance with pedigree 1.42, pedigree (1,1,5,1,1)
  (same comment as for Aluminium III)
- Dinitrogen monoxide [air, urban air close to ground]: 9.794e-6 kg; lognormal variance with pedigree 1.35, pedigree (1,1,5,1,1)
  (same comment as for Carbon dioxide, non-fossil)
- Iron ion [air, urban air close to ground]: 2.0829e-7 kg; lognormal variance with pedigree 0.31, pedigree (1,1,5,1,1)
  (same comment as for Aluminium III)
- Lead II [air, urban air close to ground]: 1.3408e-10 kg; lognormal variance with pedigree 1.25, pedigree (1,1,5,1,1)
  (same comment as for Aluminium III)
- Magnesium [air, urban air close to ground]: 3.6245e-7 kg; lognormal variance with pedigree 0.67, pedigree (1,1,5,1,1)
  (same comment as for Aluminium III)
- Manganese II [air, urban air close to ground]: 6.6821e-14 kg; lognormal variance with pedigree 1.17, pedigree (1,1,5,1,1)
  (same comment as for Aluminium III)
- Mercury II [air, urban air close to ground]: 2.2442e-15 kg; lognormal variance with pedigree 1.84, pedigree (1,1,5,1,1)
  (same comment as for Aluminium III)
- Methane, non-fossil [air, urban air close to ground]: 1.1444e-6 kg; lognormal variance with pedigree 0.09, pedigree (1,1,5,1,1)
  (same comment as for Aluminium III)
- Molybdenum VI [air, urban air close to ground]: 4.4339e-10 kg; lognormal variance with pedigree 1.6, pedigree (1,1,5,1,1)
  (same comment as for Aluminium III)
- Nickel II [air, urban air close to ground]: 5.2624e-14 kg; lognormal variance with pedigree 1.46, pedigree (1,1,5,1,1)
  (same comment as for Aluminium III)
- Nitrogen oxides [air, urban air close to ground]: 6.7471e-5 kg; lognormal variance with pedigree 1.42, pedigree (1,1,5,1,1)
  (same comment as for Aluminium III)
- Phosphorus [air, urban air close to ground]: 1.0066e-6 kg; lognormal variance with pedigree 0.5, pedigree (1,1,5,1,1)
  (same comment as for Aluminium III)
- Silicon [air, urban air close to ground]: 3.2166e-6 kg; lognormal variance with pedigree 0.45, pedigree (1,1,5,1,1)
  (same comment as for Aluminium III)
- Sulfur dioxide [air, urban air close to ground]: 3.9658e-6 kg; lognormal variance with pedigree 0.5, pedigree (1,1,5,1,1)
  (same comment as for Aluminium III)
- Tin ion [air, urban air close to ground]: 1.2334e-9 kg; lognormal variance with pedigree 1.41, pedigree (1,1,5,1,1)
  (same comment as for Aluminium III)
- Water [air, unspecified]: 0.00095 m3; name water_to_air_unspecified; lognormal variance with pedigree 0.0807, pedigree (2,2,5,1,1)
  Calculated value based on water balance.
  property carbon content, fossil 0; name C_content_fossil
  property carbon content, non-fossil 0; name C_content_non_fossil
  property fraction, origin: fresh water 0; name fraction_origin_fresh_water
  property fraction, origin: salt water 0; name fraction_origin_salt_water
  property fraction, origin: unspecified 1; name fraction_origin_unspecified
  property water in wet mass 1000 kg; name WWM
- Zinc II [air, urban air close to ground]: 5.8029e-10 kg; lognormal variance with pedigree 0.96, pedigree (1,1,5,1,1)
  (same comment as for Aluminium III)
- Aluminium III [water, ground-, long-term]: 0.00051255 kg; lognormal variance with pedigree 0.49, pedigree (1,1,5,1,1)
  (same comment as for Aluminium III)
- Aluminium III [water, surface water]: 5.7631e-8 kg; lognormal variance with pedigree 0.94, pedigree (1,1,5,1,1)
  (same comment as for Aluminium III)
- Ammonium [water, surface water]: 0.00027577 kg; lognormal variance with pedigree 0.09, pedigree (1,1,5,1,1)
  emission from treatment of dewatering liquid, uncertainty calculated from waste composition and treatment model
- Arsenic ion [water, ground-, long-term]: 5.0212e-8 kg; lognormal variance with pedigree 1.7, pedigree (1,1,5,1,1)
  (same comment as for Aluminium III)
- Arsenic ion [water, surface water]: 4.122e-8 kg; lognormal variance with pedigree 1.44, pedigree (1,1,5,1,1)
  (same comment as for Aluminium III)
- BOD5, Biological Oxygen Demand [water, ground-, long-term]: 0.00016078 kg; lognormal variance with pedigree 0.12, pedigree (1,1,5,1,1)
  (same comment as for Aluminium III)
- BOD5, Biological Oxygen Demand [water, surface water]: 6.9593e-5 kg; lognormal variance with pedigree 0.05, pedigree (1,1,5,1,1)
  (same comment as for Carbon dioxide, non-fossil)
- COD, Chemical Oxygen Demand [water, ground-, long-term]: 0.00049154 kg; lognormal variance with pedigree 0.12, pedigree (1,1,5,1,1)
  (same comment as for Aluminium III)
- COD, Chemical Oxygen Demand [water, surface water]: 0.00023369 kg; lognormal variance with pedigree 0.04, pedigree (1,1,5,1,1)
  (same comment as for Carbon dioxide, non-fossil)
- Cadmium II [water, ground-, long-term]: 6.52e-10 kg; lognormal variance with pedigree 7.44, pedigree (1,1,5,1,1)
  (same comment as for Aluminium III)
- Cadmium II [water, surface water]: 2.9469e-11 kg; lognormal variance with pedigree 1.7, pedigree (1,1,5,1,1)
  (same comment as for Aluminium III)
- Calcium II [water, ground-, long-term]: 0.0020403 kg; lognormal variance with pedigree 0.36, pedigree (1,1,5,1,1)
  (same comment as for Aluminium III)
- Calcium II [water, surface water]: 8.8629e-6 kg; lognormal variance with pedigree 0.83, pedigree (1,1,5,1,1)
  (same comment as for Aluminium III)
- Chloride [water, surface water]: 5.6956e-5 kg; lognormal variance with pedigree 0.09, pedigree (1,1,5,1,1)
  (same comment as for Ammonium)
- Chromium III [water, surface water]: 9.0269e-9 kg; lognormal variance with pedigree 1.26, pedigree (1,1,5,1,1)
  (same comment as for Aluminium III)
- Chromium VI [water, ground-, long-term]: 2.9983e-7 kg; lognormal variance with pedigree 1.46, pedigree (1,1,5,1,1)
  (same comment as for Aluminium III)
- Chromium VI [water, surface water]: 9.2284e-8 kg; lognormal variance with pedigree 1.17, pedigree (1,1,5,1,1)
  (same comment as for Aluminium III)
- Cobalt II [water, ground-, long-term]: 3.2796e-7 kg; lognormal variance with pedigree 1.46, pedigree (1,1,5,1,1)
  (same comment as for Aluminium III)
- Cobalt II [water, surface water]: 6.4079e-11 kg; lognormal variance with pedigree 1.94, pedigree (1,1,5,1,1)
  (same comment as for Aluminium III)
- Copper ion [water, ground-, long-term]: 1.0539e-5 kg; lognormal variance with pedigree 1.02, pedigree (1,1,5,1,1)
  (same comment as for Aluminium III)
- Copper ion [water, surface water]: 5.2943e-10 kg; lognormal variance with pedigree 1.66, pedigree (1,1,5,1,1)
  (same comment as for Aluminium III)
- DOC, Dissolved Organic Carbon [water, ground-, long-term]: 0.0001945 kg; lognormal variance with pedigree 0.12, pedigree (1,1,5,1,1)
  (same comment as for Aluminium III)
- DOC, Dissolved Organic Carbon [water, surface water]: 5.4666e-5 kg; lognormal variance with pedigree 0.05, pedigree (1,1,5,1,1)
  (same comment as for Carbon dioxide, non-fossil)
- Iron ion [water, ground-, long-term]: 0.0029225 kg; lognormal variance with pedigree 1.07, pedigree (1,1,5,1,1)
  (same comment as for Aluminium III)
- Iron ion [water, surface water]: 2.1351e-6 kg; lognormal variance with pedigree 0.28, pedigree (1,1,5,1,1)
  (same comment as for Aluminium III)
- Lead II [water, ground-, long-term]: 2.5735e-7 kg; lognormal variance with pedigree 7.26, pedigree (1,1,5,1,1)
  (same comment as for Aluminium III)
- Lead II [water, surface water]: 1.0062e-10 kg; lognormal variance with pedigree 1.22, pedigree (1,1,5,1,1)
  (same comment as for Aluminium III)
- Magnesium [water, ground-, long-term]: 0.00024298 kg; lognormal variance with pedigree 0.63, pedigree (1,1,5,1,1)
  (same comment as for Aluminium III)
- Magnesium [water, surface water]: 9.2146e-7 kg; lognormal variance with pedigree 1.12, pedigree (1,1,5,1,1)
  (same comment as for Aluminium III)
- Manganese II [water, ground-, long-term]: 1.0568e-5 kg; lognormal variance with pedigree 1.14, pedigree (1,1,5,1,1)
  (same comment as for Aluminium III)
- Manganese II [water, surface water]: 6.8659e-10 kg; lognormal variance with pedigree 1.82, pedigree (1,1,5,1,1)
  (same comment as for Aluminium III)
- Mercury II [water, ground-, long-term]: 3.3808e-9 kg; lognormal variance with pedigree 3.5, pedigree (1,1,5,1,1)
  (same comment as for Aluminium III)
- Mercury II [water, surface water]: 6.9488e-10 kg; lognormal variance with pedigree 1.71, pedigree (1,1,5,1,1)
  (same comment as for Aluminium III)
- Molybdenum VI [water, ground-, long-term]: 1.8338e-7 kg; lognormal variance with pedigree 1.58, pedigree (1,1,5,1,1)
  (same comment as for Aluminium III)
- Molybdenum VI [water, surface water]: 3.7864e-8 kg; lognormal variance with pedigree 1.06, pedigree (1,1,5,1,1)
  (same comment as for Aluminium III)
- Nickel II [water, ground-, long-term]: 1.1416e-6 kg; lognormal variance with pedigree 1.31, pedigree (1,1,5,1,1)
  (same comment as for Aluminium III)
- Nickel II [water, surface water]: 7.6477e-10 kg; lognormal variance with pedigree 1.93, pedigree (1,1,5,1,1)
  (same comment as for Aluminium III)
- Nitrate [water, ground-, long-term]: 7.6181e-5 kg; lognormal variance with pedigree 0.4, pedigree (1,1,5,1,1)
  (same comment as for Aluminium III)
- Nitrate [water, surface water]: 0.0012787 kg; lognormal variance with pedigree 0.09, pedigree (1,1,5,1,1)
  (same comment as for Carbon dioxide, non-fossil)
- Nitrogen [water, surface water]: 1.893e-5 kg; lognormal variance with pedigree 0.11, pedigree (1,1,5,1,1)
  (same comment as for Ammonium)
- Phosphate [water, ground-, long-term]: 0.00011789 kg; lognormal variance with pedigree 4.68, pedigree (1,1,5,1,1)
  (same comment as for Aluminium III)
- Phosphate [water, surface water]: 1.4382e-5 kg; lognormal variance with pedigree 0.09, pedigree (1,1,5,1,1)
  (same comment as for Carbon dioxide, non-fossil)
- Silicon [water, ground-, long-term]: 0.00011998 kg; lognormal variance with pedigree 5.24, pedigree (1,1,5,1,1)
  (same comment as for Aluminium III)
- Silicon [water, surface water]: 2.9278e-7 kg; lognormal variance with pedigree 0.69, pedigree (1,1,5,1,1)
  (same comment as for Aluminium III)
- Sulfate [water, ground-, long-term]: 0.0023347 kg; lognormal variance with pedigree 0.28, pedigree (1,1,5,1,1)
  (same comment as for Aluminium III)
- Sulfate [water, surface water]: 0.00050662 kg; lognormal variance with pedigree 0.2, pedigree (1,1,5,1,1)
  (same comment as for Carbon dioxide, non-fossil)
- TOC, Total Organic Carbon [water, ground-, long-term]: 0.0001945 kg; lognormal variance with pedigree 0.12, pedigree (1,1,5,1,1)
  (same comment as for Aluminium III)
- TOC, Total Organic Carbon [water, surface water]: 5.4666e-5 kg; lognormal variance with pedigree 0.04, pedigree (1,1,5,1,1)
  (same comment as for Carbon dioxide, non-fossil)
- Tin ion [water, ground-, long-term]: 4.674e-7 kg; lognormal variance with pedigree 1.73, pedigree (1,1,5,1,1)
  (same comment as for Aluminium III)
- Tin ion [water, surface water]: 3.4498e-11 kg; lognormal variance with pedigree 1.46, pedigree (1,1,5,1,1)
  (same comment as for Aluminium III)
- Zinc II [water, ground-, long-term]: 5.5071e-7 kg; lognormal variance with pedigree 5.51, pedigree (1,1,5,1,1)
  (same comment as for Aluminium III)
- Zinc II [water, surface water]: 6.5306e-9 kg; lognormal variance with pedigree 0.81, pedigree (1,1,5,1,1)
  (same comment as for Aluminium III)

## Sampling procedure
waste-specific calculation based on literature data

## Extrapolations
Typical elemental transfer coefficients from current studies for modern MSWI, completed with data from coal power plants and estimates, adapted for inert/burnable waste.

## Review by Niels Jungbluth 2006-07-19
Passed.
none
