# treatment of scrap steel, municipal incineration

Dataset: EcoSpold 2, unit process
Geography: Europe without Switzerland
Time period: 2006-01-01 to 2022-12-31
Technology level: current
Classification: ISIC rev.4 ecoinvent: 3821:Treatment and disposal of non-hazardous waste
Synonyms: municipal waste incineration
Scenario: Business-as-Usual
System model: Allocation at the point of substitution
Generated by: [System]
Database: ecoinvent
isCopyrightProtected: true

## General comment
This dataset represents the activity of waste disposal of scrap steel in a municipal solid waste incinerator (MSWI) // Recommended use of this dataset: For disposal of bulky, non-dust steel which goes to incineration as part of a larger item or in small amounts only. Pure, isolated steel fractions will not be disposed in incinerators, but rather go to recycling. // // Waste composition (wet, in ppm): H2O n.a.; O 121260; H n.a.; C n.a.; S 760; N n.a.; P 800; B n.a.; Cl 750; Br n.a.; F n.a.; I n.a.; Ag n.a.; As n.a.; Ba n.a.; Cd 3; Co n.a.; Cr 1200; Cu 13570; Hg n.a.; Mn 2400; Mo n.a.; Ni 1050; Pb 380; Sb 210; Se n.a.; Sn 670; V 250; Zn 202; Be n.a.; Sc n.a.; Sr n.a.; Ti n.a.; Tl n.a.; W n.a.; Si 30950; Fe 815330; Ca n.a.; Al 10220; K n.a.; Mg n.a.; Na n.a.; // Share of carbon in waste that is biogenic 60.4%. // Share of metals in waste not oxidised and bulk-recyclable (exclude very small or thin parts) Iron: 100%; Alu: 0%; Copper: 0%. // One kg of this waste produces 0.551 kg of slag and 0 kg of residues, which are landfilled. // Net energy production: 0MJ/kg electric energy and 0MJ/kg thermal energy. // Recovery of metal scrap to recycling: 472.89g iron scrap, 0g aluminium scrap, 0g copper scrap.

## Included activities start
Waste incineration from waste reception gate and delivery into waste bunker at incinerator plant site (without transports to the incinerator).

## Included activities end
Waste-specific short-term emissions to water from leachate. Long-term emissions from landfill to ground water.

## Geography
Specific to the technology mix encountered in Switzerland in 2010. Well applicable to modern incineration practices in Europe, North America or Japan.

## Technology
average Swiss MSWI plants in 2010 (grate incinerators) with electrostatic precipitator for fly ash (ESP), wet flue gas scrubber and 25% SNCR , 42.77% SCR-high dust , 32.68% SCR-low dust -DeNOx facilities and 0% without Denox (weighted according to mass of burnt waste, representing Swiss average). Efficiency of iron scrap separation from slag : 58%. Efficiency of non-ferrous scrap separation from slag : 31%. Gross electric efficiency technology mix 15.84% and Gross thermal efficiency technology mix 28.51%

## Time period
Waste composition as given in literature reference, theoretical data or other source. Transfer coefficients for modern MSWI.

## Reference product
- iron scrap, sorted, pressed: 1 kg; name ByP_01; By-product classification Recyclable; CPC 39310: Slag, dross, scalings and other waste from the manufacture of iron or steel; lognormal variance with pedigree 0.0104, pedigree (1,1,1,1,1)
  Iron scrap recovered from this waste.
  production volume 4.87266e8 kg
    calculated in proportion to reference product waste input to incinerator
  property price 0.175 EUR2005
    Temporary price data. Calculated as 90% of purchasers price based on: 2005 import and export prices (total trades (USD) divided by total weight (kg) in biggest economies of the world: EU27, USA, Brasil, China, India, Japan and Russia) from UN Commodity Trade Statistics Database (http://data.un.org/Explorer.aspxDatabase [Accessed 2011.06.20]). Commodity: Waste or scrap, of cast iron
  properties: carbon allocation 0 kg, carbon content 0, carbon content, fossil 0, carbon content, non-fossil 0, dry mass 1 kg, water content 0, water in wet mass 0 kg, wet mass 1 kg

## Inputs from technosphere
- 1,1-difluoroethane, HFC-152a: 2.62675e-6 kg
- 1-butanol: 7.13816e-9 kg
- EDTA, ethylenediaminetetraacetic acid: 3.3955e-8 kg
- acetic acid, without water, in 98% solution state: 1.25265e-6 kg
- acetylene: 8.54955e-8, 4.05858e-7 kg (2 suppliers, which the file names only by identifier); sum of these 4.91353e-7 kg
- acrylic dispersion, with water, in 58% solution state: 6.00734e-9 kg
- acrylic varnish, with water, in 53% solution state: 1.97384e-9 kg
- acrylonitrile-butadiene-styrene copolymer: 0.000250424 kg
- activated bentonite: 0.00594628 kg
- activated carbon, granular: 6.37585e-8 kg
- activated silica: 5.2487e-8 kg
- air compressor, screw-type compressor, 300kW: 5.13135e-10 unit
- air compressor, screw-type compressor, 4kW: 1.67055e-9 unit
- alkyd paint, white, without solvent, in 60% solution state: 5.65054e-5, 0.000268583 kg (2 suppliers, which the file names only by identifier); sum of these 0.000325088 kg
- alkyd paint, white, without water, in 60% solution state: 5.82815e-8, 2.7667e-7 kg (2 suppliers, which the file names only by identifier); sum of these 3.34951e-7 kg
- aluminium alloy, metal matrix composite: 9.43541e-8 kg
- aluminium casting facility: 1.79923e-15 unit
- aluminium electrolysis facility: 1.09551e-14 unit
- aluminium fluoride: 1.18215e-6 kg
- aluminium oxide factory: 3.71643e-12 unit
- aluminium oxide, metallurgical: 0.00013652 kg
- aluminium oxide, non-metallurgical: 9.22117e-7, 5.44666e-6 kg (2 suppliers, which the file names only by identifier); sum of these 6.36878e-6 kg
- aluminium scrap, new: -7.45749e-8, -7.45749e-8 kg (2 suppliers, which the file names only by identifier); sum of these -1.4915e-7 kg
- aluminium scrap, post-consumer: -2.20425e-5 kg
- aluminium sulfate, powder: 5.44377e-6, 1.80687e-6 kg (2 suppliers, which the file names only by identifier); sum of these 7.25064e-6 kg
- aluminium, cast alloy: 0.000184688 kg
- aluminium, primary, ingot: 1.86329e-5, 3.38329e-6, 1.96452e-6 kg (3 suppliers, which the file names only by identifier); sum of these 2.39807e-5 kg
- aluminium, wrought alloy: 7.02079e-5 kg
- anionic resin: 2.66786e-6, 1.21476e-13 kg (2 suppliers, which the file names only by identifier); sum of these 2.66786e-6 kg
- anode factory: 3.33074e-14 unit
- anode, paste, for aluminium electrolysis: 1.72059e-6 kg
- anode, prebake, for aluminium electrolysis: 2.80285e-5 kg
- asbestos, crysotile type: 0.00029549 kg
- average incineration residue: -6.67808e-7, -5.30356e-9 kg (2 suppliers, which the file names only by identifier); sum of these -6.73112e-7 kg
- barite: 5.27291e-6 kg
- battery, Li-ion, LiMn2O4, rechargeable, prismatic: 1.5127e-7 kg
- bentonite: 1.7337e-5 kg
- benzene: 2.14032e-7 kg
- bitumen adhesive compound, hot: 0.00485243 kg
- bitumen seal: 2.04585e-5 kg
- blasting: 2.8625e-8 kg
- brass: 1.27955e-6, 6.01185e-9 kg (2 suppliers, which the file names only by identifier); sum of these 1.28556e-6 kg
- bronze: 5.37467e-5 kg
- building, hall: 3.03864e-6 m2
- building, hall, steel construction: 1.10391e-6 m2
- building, multi-storey: 9.81771e-7, 1.10409e-6 m3 (2 suppliers, which the file names only by identifier); sum of these 2.08586e-6 m3
- cable, three-conductor cable: 5.59855e-7 m
- cable, unspecified: 1.45804e-5 kg
- cadmium: 4.15236e-11 kg
- carbon dioxide, liquid: 4.34115e-9, 9.68217e-10 kg (2 suppliers, which the file names only by identifier); sum of these 5.30937e-9 kg
- carbon fibre reinforced plastic, injection moulded: 1.51442e-7 kg
- cast iron: 0.00449819 kg
- cast iron removed by milling, average: 3.54971e-9 kg
- cathode, for aluminium electrolysis: 4.01176e-7 kg
- cationic resin: 5.89008e-6, 4.84383e-14 kg (2 suppliers, which the file names only by identifier); sum of these 5.89008e-6 kg
- cellulose fibre: 4.6138e-6 kg
- cement, CEM III/A: 2.33829e-6, 9.77123e-10, 3.36487e-5, 3.78111e-8 kg (4 suppliers, which the file names only by identifier); sum of these 3.60258e-5 kg
- cement, Portland: 7.07498e-5, 1.72838e-6, 2.60297e-6, 1.86817e-6, 2.02537e-5, 0.00393342, 3.32001e-6, 0.000401533, 1.54146e-5 kg (9 suppliers, which the file names only by identifier); sum of these 0.00445089 kg
- cement, unspecified: 5.10171e-5, 1.91413e-7, 1.25203e-7, 4.0634e-10, 5.06598e-6, 1.33394e-6, 1.59015e-7, 6.2995e-8, 8.12907e-7, 2.59302e-6 kg (10 suppliers, which the file names only by identifier); sum of these 6.1362e-5 kg
- ceramic tile: 2.81046e-5 kg
- charcoal: 4.2584e-7 kg
- chemical factory: 2.93336e-6, 1.44867e-6 kg (2 suppliers, which the file names only by identifier); sum of these 4.38203e-6 kg
- chemical factory, organics: 3.37007e-14 unit
- chemical, inorganic: 5.16606e-7 kg
- chemical, organic: 9.76012e-6 kg
- chlorine dioxide: 5.87174e-9, 3.30689e-9 kg (2 suppliers, which the file names only by identifier); sum of these 9.17863e-9 kg
- chlorine, liquid: 1.47725e-7, 1.10715e-7 kg (2 suppliers, which the file names only by identifier); sum of these 2.5844e-7 kg
- chlorodifluoromethane: 3.47037e-12 kg
- chromium: 5.66677e-7 kg
- chromium steel pipe: 4.5559e-6 kg
- chromium steel removed by milling, average: 3.77559e-9 kg
- coal slurry: -1.3076e-9 kg
- coke: 9.04323e-6 MJ
- compressed air, 1000 kPa gauge: 3.0769e-5, 1.25205e-5 m3 (2 suppliers, which the file names only by identifier); sum of these 4.32896e-5 m3
- compressed air, 800 kPa gauge: 0.000147948, 6.02031e-5 m3 (2 suppliers, which the file names only by identifier); sum of these 0.000208151 m3
- concrete block: 2.28218e-6, 1.80178e-8, 3.97796e-8 kg (3 suppliers, which the file names only by identifier); sum of these 2.33998e-6 kg
- concrete mixing factory: 5.20035e-14 unit
- concrete, normal strength: 9.44324e-8, 3.53873e-6, 1.86552e-8, 1.99094e-7, 2.07453e-8, 1.57321e-6, 1.67948e-7, 7.12313e-6, 3.46864e-7, 2.62939e-7 m3 (10 suppliers, which the file names only by identifier); sum of these 1.33457e-5 m3
- control cabinet, heat and power co-generation unit, 160kW electrical: 1.48491e-12 unit
- conveyor belt: 9.59908e-9 m
- copper scrap, sorted, pressed: -1.29856e-5 kg
- copper, cathode: 0.000382891 kg
- corrugated board box: 7.46895e-7, 1.73362e-6, 5.99715e-7, 2.78219e-8 kg (4 suppliers, which the file names only by identifier); sum of these 3.10805e-6 kg
- cryolite: 1.1393e-7 kg
- decommissioned chemical production facilities: -4.38246e-6 kg
- decommissioned pipeline, natural gas: -1.71381e-5 kg
- diesel: 2.82077e-6 kg
- diesel, burned in agricultural machinery: 1.02061e-5 MJ
- diesel, burned in building machine: 0.0629937 MJ
- diesel, burned in diesel-electric generating set, 10MW: 2.92733e-5 MJ
- diesel, burned in diesel-electric generating set, 18.5kW: 5.68686e-6 MJ
- dimethyldichlorosilane: 3.64682e-8 kg
- diphenylether-compound: 5.93635e-7 kg
- dolomite: 6.68455e-5, 3.54089e-5 kg (2 suppliers, which the file names only by identifier); sum of these 0.000102254 kg
- drawing of pipe, steel: 0.000381454 kg
- drilling waste: -0.000122859 kg
- dust collector, electrostatic precipitator, for industrial use: 3.47871e-13 unit
- electricity, high voltage: 5.15977e-7, 7.01158e-6, 6.25868e-8, 2.0104e-10, 1.83162e-10, 3.72535e-7, 6.84322e-6, 1.49465e-6, 1.09238e-7, 1.87362e-6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 kWh (80 suppliers, which the file names only by identifier); sum of these 0.00228755 kWh
- electricity, low voltage: 6.3532e-9, 5.49058e-8, 1.72489e-9, 5.73945e-9, 7.72813e-9, 5.31517e-9, 2.9325e-8, 1.04277e-7, 5.53782e-5, 5.64287e-8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 kWh (50 suppliers, which the file names only by identifier); sum of these 0.00198315 kWh
- electricity, medium voltage: 9.26161e-6, 1.25055e-5, 2.7036e-6, 1.79853e-5, 3.7543e-6, 7.60913e-6, 0.0192309, 7.94169e-7, 0.000175201, 6.60145e-7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 kWh (161 suppliers, which the file names only by identifier); sum of these 0.0339066 kWh
- electricity, medium voltage, aluminium industry: 0.00106471 kWh
- electronic component machinery, unspecified: 1.73951e-7 unit
- electronic component, passive, unspecified: 5.46356e-5 kg
- electronics scrap from control units: -6.08369e-6 kg
- electronics, for control units: 1.50515e-5 kg
- energy and auxilliary inputs, metal working factory: 1.31486e-12, 2.93212e-13 kg (2 suppliers, which the file names only by identifier); sum of these 1.60808e-12 kg
- epoxy resin, liquid: 2.48667e-5, 5.23825e-6 kg (2 suppliers, which the file names only by identifier); sum of these 3.01049e-5 kg
- ethoxylated alcohol (AE3): 2.52755e-7 kg
- ethoxylated alcohol (AE7): 1.6388e-7, 1.03071e-6 kg (2 suppliers, which the file names only by identifier); sum of these 1.19459e-6 kg
- ethylene glycol monoethyl ether: 2.64525e-9 kg
- ethylene vinyl acetate copolymer: 7.92095e-6, 3.91182e-6 kg (2 suppliers, which the file names only by identifier); sum of these 1.18328e-5 kg
- excavation, hydraulic digger: 1.58903e-7, 0.000213255 m3 (2 suppliers, which the file names only by identifier); sum of these 0.000213414 m3
- excavation, skid-steer loader: 0.000420841 m3
- expanded perlite: 2.30258e-7 kg
- explosive, tovex: 2.3582e-5 kg
- extrusion of plastic sheets and thermoforming, inline: 1.75321e-6 kg
- extrusion, plastic pipes: 7.01784e-7 kg
- ferrite: 1.9487e-6 kg
- fibre cement facing tile: 5.14678e-5 kg
- fibre cement roof slate: 9.03563e-6 kg
- filter dust from Al electrolysis: -9.61057e-8 kg
- flat glass factory: 1.7574e-13 unit
- flat glass, coated: 4.50012e-6, 1.23944e-5 kg (2 suppliers, which the file names only by identifier); sum of these 1.68945e-5 kg
- flat glass, uncoated: 4.13589e-5, 0.000200739 kg (2 suppliers, which the file names only by identifier); sum of these 0.000242098 kg
- fly ash and scrubber sludge: -3.35459e-8 kg
- foam glass: 3.23068e-8 kg
- formaldehyde: 7.13909e-9, 2.98491e-8 kg (2 suppliers, which the file names only by identifier); sum of these 3.69882e-8 kg
- furnace, wood chips, with silo, 5000kW: 3.47868e-13 unit
- gas boiler: 3.3913e-11 unit
- gas turbine, 80MW, for compressed air energy storage: 1.83394e-11 unit
- generator, 200kW electrical: 5.97134e-11 unit
- glass fibre: 9.03073e-6 kg
- glass fibre reinforced plastic, polyamide, injection moulded: 4.78658e-5 kg
- glass fibre reinforced plastic, polyester resin, hand lay-up: 2.64169e-5 kg
- glass tube, borosilicate: 3.98362e-7 kg
- glass wool mat: 0.000340415 kg
- glued laminated timber, average glue mix: 3.44201e-7, 7.47325e-7 m3 (2 suppliers, which the file names only by identifier); sum of these 1.09153e-6 m3
- glycerine: 3.35894e-8, 1.89916e-7 kg (2 suppliers, which the file names only by identifier); sum of these 2.23505e-7 kg
- gold: 1.04395e-10 kg
- graphite: 1.98064e-10 kg
- gravel, crushed: 3.66503e-8, 0.0312979, 0.120133, 0.000625892, 0.00683663 kg (5 suppliers, which the file names only by identifier); sum of these 0.158893 kg
- gravel, round: 0.0051473, 0.0339084 kg (2 suppliers, which the file names only by identifier); sum of these 0.0390557 kg
- gravel/sand quarry infrastructure: 4.79449e-12 unit
- hard coal: 0.000318759, 0.000144537, 8.92737e-5, 0.00102292, 0.000147496, 0.000112534, 6.27243e-5, 3.42975e-5 kg (8 suppliers, which the file names only by identifier); sum of these 0.00193254 kg
- hazardous waste, for incineration: -1.32742e-5, -1.67151e-5, -4.36916e-7 kg (3 suppliers, which the file names only by identifier); sum of these -3.04262e-5 kg
- hazardous waste, for underground deposit: -6.82305e-6, -4.3949e-7 kg (2 suppliers, which the file names only by identifier); sum of these -7.26254e-6 kg
- heat, central or small-scale, natural gas: 2.76608e-5 MJ
- heat, central or small-scale, other than natural gas: 0.00328621, 0.000509024, 4.51363e-5 MJ (3 suppliers, which the file names only by identifier); sum of these 0.00384037 MJ
- heat, district or industrial, natural gas: 0.0121408, 0.016801, 0.000248238, 0.0314977, 7.49473e-6 MJ (5 suppliers, which the file names only by identifier); sum of these 0.0606952 MJ
- heat, district or industrial, other than natural gas: 3.04695e-6, 0.000864981, 0.00124912, 5.30669e-8, 0.000763438, 0.000622873, 7.95468e-8, 0.0142357, 1.22592e-5 MJ (9 suppliers, which the file names only by identifier); sum of these 0.0177516 MJ
- heavy water: 6.67378e-11 kg
- helium: 5.87293e-11 kg
- hot water tank factory: 1.11497e-12 unit
- hydrazine: 4.10438e-11 kg
- hydrochloric acid, without water, in 30% solution state: 5.82777e-10, 2.60959e-9 kg (2 suppliers, which the file names only by identifier); sum of these 3.19237e-9 kg
- hydrogen peroxide, without water, in 50% solution state: 3.08138e-6, 1.07354e-6 kg (2 suppliers, which the file names only by identifier); sum of these 4.15492e-6 kg
- hydrogen, liquid: 1.54498e-10 kg
- industrial furnace, 1MW, oil: 3.02054e-10 unit
- industrial furnace, natural gas: 2.01039e-10 unit
- industrial machine, heavy, unspecified: 9.60018e-6 kg
- inert waste: -7.76731e-7, -5.33134e-9, -2.18193e-6 kg (3 suppliers, which the file names only by identifier); sum of these -2.96399e-6 kg
- inert waste, for final disposal: -2.71093e-6, -0.177118 kg (2 suppliers, which the file names only by identifier); sum of these -0.177121 kg
- injection moulding: 0.00010374, 8.93958e-8 kg (2 suppliers, which the file names only by identifier); sum of these 0.000103829 kg
- ion-exchanger for water treatment: 1.04179e-15 unit
- iron ore concentrate: 0.15609 kg
- iron(III) sulfate, without water, in 12.5% iron solution state: 6.78979e-7 kg
- iron-nickel-chromium alloy: 6.798e-6 kg
- isopropanol: 2.78381e-8, 3.54595e-9 kg (2 suppliers, which the file names only by identifier); sum of these 3.1384e-8 kg
- kaolin: 1.0788e-5 kg
- kerosene: 9.22284e-8, 1.56006e-5, 5.52632e-7, 3.1927e-6, 1.75326e-6, 1.17104e-7, 2.26952e-7, 1.50214e-7 kg (8 suppliers, which the file names only by identifier); sum of these 2.16857e-5 kg
- kraft paper: 1.35218e-5, 5.9308e-6 kg (2 suppliers, which the file names only by identifier); sum of these 1.94526e-5 kg
- lead: 3.23421e-5 kg
- lean concrete: 1.09569e-8 m3
- lime: 3.7743e-6, 4.37e-5 kg (2 suppliers, which the file names only by identifier); sum of these 4.74743e-5 kg
- lime, hydrated, loose weight: 7.31055e-7 kg
- lime, hydrated, packed: 5.19209e-9, 4.40722e-11 kg (2 suppliers, which the file names only by identifier); sum of these 5.23616e-9 kg
- lithium fluoride: 3.64682e-8 kg
- low level radioactive waste: -2.29244e-13 m3
- low level radioactive waste for final repository: -1.07448e-12 m3
- lubricating oil: 6.0719e-5, 1.22132e-5 kg (2 suppliers, which the file names only by identifier); sum of these 7.29322e-5 kg
- maintenance, refrigeration machine: 3.62307e-9 unit
- maintenance, transmission network, electricity, high voltage direct current aerial line: 1.09156e-8 km*year
- maintenance, transmission network, electricity, high voltage direct current subsea cable: 2.84724e-8 km*year
- maize starch: 8.68288e-10 kg
- maleic unsaturated polyester resin: 3.67408e-6 kg
- manganese: 6.08596e-10 kg
- marine engine: 2.17597e-6 unit
- medium density fibreboard: 8.45557e-9, 5.41533e-8 m3 (2 suppliers, which the file names only by identifier); sum of these 6.26089e-8 m3
- metal working factory: 1.60808e-12 unit
- metal working, average for aluminium product manufacturing: 8.23023e-6, 2.43757e-7 kg (2 suppliers, which the file names only by identifier); sum of these 8.47399e-6 kg
- metal working, average for chromium steel product manufacturing: 1.98582e-5, 4.59689e-6 kg (2 suppliers, which the file names only by identifier); sum of these 2.44551e-5 kg
- metal working, average for metal product manufacturing: 1.63937e-6 kg
- metal working, average for steel product manufacturing: 2.48363e-5, 0.000915167 kg (2 suppliers, which the file names only by identifier); sum of these 0.000940004 kg
- methyl ethyl ketone: 1.40965e-9, 5.31934e-10 kg (2 suppliers, which the file names only by identifier); sum of these 1.94158e-9 kg
- methylcyclopentane: 5.25351e-6 kg
- molybdenum: 2.72085e-10 kg
- municipal solid waste: -1.0092e-7, -4.78198e-5, -2.25574e-9, -0.000102919, -7.3656e-8, -0.000144885, -5.16194e-8 kg (7 suppliers, which the file names only by identifier); sum of these -0.000295852 kg
- nickel smelter slag: -2.8505e-7 kg
- nickel, class 1: 3.048e-7 kg
- nitrate salts, for solar power application: 7.85712e-6 kg
- nitric acid, without water, in 50% solution state: 1.24386e-7, 4.68262e-10, 1.84818e-7, 4.59607e-7, 5.97705e-7, 2.2022e-7, 7.57413e-7, 5.77829e-11, 1.84134e-7, 4.06073e-10 kg (10 suppliers, which the file names only by identifier); sum of these 2.52921e-6 kg
- nitrogen, liquid: 1.45379e-10 kg
- nuclear power plant, pressure water reactor, 650MW: 9.62277e-16 unit
- nylon 6: 9.72026e-7, 4.90146e-7 kg (2 suppliers, which the file names only by identifier); sum of these 1.46217e-6 kg
- oxygen, liquid: 9.59399e-6, 3.3032e-5 kg (2 suppliers, which the file names only by identifier); sum of these 4.26259e-5 kg
- palladium: 4.54654e-11 kg
- palm oil, crude: 1.4668e-5 kg
- paper machine: 3.56797e-14, 7.2247e-14 unit (2 suppliers, which the file names only by identifier); sum of these 1.07927e-13 unit
- paper, woodfree, coated: 7.01697e-6, 1.40149e-9 kg (2 suppliers, which the file names only by identifier); sum of these 7.01838e-6 kg
- paraffin: 1.02226e-8 kg
- particleboard, cement bonded: 7.07527e-13, 4.57877e-13 m3 (2 suppliers, which the file names only by identifier); sum of these 1.1654e-12 m3
- particleboard, uncoated: 3.2277e-8, 1.55932e-8 m3 (2 suppliers, which the file names only by identifier); sum of these 4.78701e-8 m3
- perfluoropentane: 1.39473e-5 kg
- petroleum coke: 7.90052e-5 kg
- phenol: 2.39638e-9, 7.47895e-9 kg (2 suppliers, which the file names only by identifier); sum of these 9.87534e-9 kg
- phenyl isocyanate: 7.09225e-5 kg
- pig iron: 2.33392e-6, 2.51982e-5 kg (2 suppliers, which the file names only by identifier); sum of these 2.75321e-5 kg
- pipeline, natural gas, low pressure distribution network: 7.43681e-12 km
- pipeline, petroleum: 3.8586e-12, 7.81317e-12 km (2 suppliers, which the file names only by identifier); sum of these 1.16718e-11 km
- pitch: 1.68547e-10, 1.38079e-7, 2.48651e-5, 1.97121e-7, 1.74142e-5, 6.80618e-8, 3.08046e-6, 1.19424e-6 kg (8 suppliers, which the file names only by identifier); sum of these 4.69574e-5 kg
- plastic processing factory: 9.80711e-14 unit
- platinum: 2.47164e-10 kg
- plywood: 1.34372e-8, 2.42621e-7 m3 (2 suppliers, which the file names only by identifier); sum of these 2.56058e-7 m3
- polyacrylamide: 2.11225e-8 kg
- polycarbonate: 1.55611e-8 kg
- polyester resin, unsaturated: 2.40811e-7, 1.64888e-6 kg (2 suppliers, which the file names only by identifier); sum of these 1.88969e-6 kg
- polyethylene terephthalate, granulate, amorphous: 3.75687e-7 kg
- polyethylene, high density, granulate: 0.00027882 kg
- polyethylene, linear low density, granulate: 5.58957e-7 kg
- polyethylene, low density, granulate: 1.74315e-5 kg
- polymer foaming: 1.31196e-8 kg
- polyol: 1.7393e-5, 3.52187e-5 kg (2 suppliers, which the file names only by identifier); sum of these 5.26117e-5 kg
- polypropylene, granulate: 0.000237176 kg
- polystyrene foam slab: 6.72398e-6 kg
- polystyrene, expandable: 8.35697e-5 kg
- polystyrene, general purpose: 2.53089e-5 kg
- polystyrene, high impact: 0.00011188 kg
- polyurethane, flexible foam: 9.08271e-5, 1.86031e-5 kg (2 suppliers, which the file names only by identifier); sum of these 0.00010943 kg
- polyurethane, rigid foam: 5.96099e-6, 2.89529e-5 kg (2 suppliers, which the file names only by identifier); sum of these 3.49139e-5 kg
- polyvinylchloride, bulk polymerised: 9.53885e-5 kg
- polyvinylchloride, emulsion polymerised: 2.6709e-6 kg
- polyvinylchloride, suspension polymerised: 3.46966e-5 kg
- polyvinylidenchloride, granulate: 2.79614e-5, 5.61525e-5 kg (2 suppliers, which the file names only by identifier); sum of these 8.41139e-5 kg
- potassium carbonate: 3.95468e-6 kg
- potassium hydroxide: 1.05383e-7 kg
- potassium permanganate: 2.17813e-8 kg
- powder coat, steel: 1.23986e-5 m2
- printed paper: 1.75498e-6 kg
- printed wiring board, surface mounted, unspecified, Pb free: 1.45974e-6 kg
- printing ink, offset, without solvent, in 47.5% solution state: 4.67967e-8 kg
- propane, burned in building machine: 8.54594e-5 MJ
- propylene glycol, liquid: 2.48751e-7, 1.22848e-7 kg (2 suppliers, which the file names only by identifier); sum of these 3.71599e-7 kg
- pulp factory: 8.48874e-16 unit
- pulpwood, softwood, measured as solid wood under bark: 7.13897e-10, 8.72318e-12 m3 (2 suppliers, which the file names only by identifier); sum of these 7.2262e-10 m3
- pump, 40W: 8.54029e-11 unit
- railway track: 2.8921e-9 m*year
- recultivation, limestone mine: 1.2819e-7 m2
- refractory spent pot liner from Al electrolysis: -1.41191e-6 kg
- refractory, basic, packed: 1.08632e-7 kg
- refractory, fireclay, packed: 0.000247319 kg
- refrigerant R134a: 1.10489e-8 kg
- refrigeration machine, R134a as refrigerant: 3.03835e-8 unit
- refrigeration machine, carbon dioxide, liquid as refrigerant: 3.37601e-9 unit
- reinforcing steel: 0.0356707 kg
- residual softwood, wet: 5.24095e-8 m3
- road: 3.09548e-5 m*year
- road vehicle factory: 1.00536e-13 unit
- road, company, internal: 1.69176e-7 m2*year
- rolling mill: 4.57747e-12 unit
- sand: 0.000127782, 6.63386e-7, 1.53896e-8, 0.00831554 kg (4 suppliers, which the file names only by identifier); sum of these 0.008444 kg
- sanitary ceramics: 0.00029549 kg
- sawlog and veneer log, hardwood, measured as solid wood under bark: 5.50077e-8, 5.17209e-9 m3 (2 suppliers, which the file names only by identifier); sum of these 6.01798e-8 m3
- sawnwood, hardwood, dried (u=10%), planed: 6.85129e-10, 2.78172e-10 m3 (2 suppliers, which the file names only by identifier); sum of these 9.63301e-10 m3
- sawnwood, softwood, dried (u=20%), planed: 2.78235e-7 m3
- sawnwood, softwood, raw, dried (u=10%): 4.60692e-10 m3
- scrap aluminium: -5.21803e-5, -2.31808e-6, -0.000110661 kg (3 suppliers, which the file names only by identifier); sum of these -0.00016516 kg
- scrap copper: -5.20133e-6, -0.000118848, -0.000247073 kg (3 suppliers, which the file names only by identifier); sum of these -0.000371123 kg
- scrap lead acid battery: -1.32492e-5 kg
- scrap steel: -1.38068e-5, -0.0364832, -0.0119207 kg (3 suppliers, which the file names only by identifier); sum of these -0.0484177 kg
- seal, natural rubber based: 3.71042e-6 kg
- seawater reverse osmosis module: 2.14452e-12 m2
- section bar rolling, steel: 8.17155e-5 kg
- sheet rolling, aluminium: 6.21859e-8, 2.04867e-5 kg (2 suppliers, which the file names only by identifier); sum of these 2.05489e-5 kg
- sheet rolling, chromium steel: 9.54266e-5 kg
- sheet rolling, copper: 2.98724e-7, 8.38879e-7 kg (2 suppliers, which the file names only by identifier); sum of these 1.1376e-6 kg
- sheet rolling, steel: 7.34585e-6, 0.00189116 kg (2 suppliers, which the file names only by identifier); sum of these 0.00189851 kg
- silica sand: 7.53885e-5 kg
- silicon carbide: 5.14065e-6 kg
- silicone product: 3.70057e-8, 7.66463e-8 kg (2 suppliers, which the file names only by identifier); sum of these 1.13652e-7 kg
- silver: 4.17579e-10 kg
- sludge from steel rolling: -4.94958e-6 kg
- soap: 4.66482e-7 kg
- soda ash, light: 2.48468e-7 kg
- sodium chlorate, powder: 3.64847e-7, 4.68013e-6 kg (2 suppliers, which the file names only by identifier); sum of these 5.04497e-6 kg
- sodium chloride, powder: 1.23253e-5 kg
- sodium dithionite, anhydrous: 2.36592e-10, 1.12313e-9 kg (2 suppliers, which the file names only by identifier); sum of these 1.35972e-9 kg
- sodium hydrosulfide: 1.75054e-7 kg
- sodium hydroxide, without water, in 50% solution state: 3.37426e-5 kg
- sodium hypochlorite, without water, in 15% solution state: 4.40981e-8, 1.2661e-7 kg (2 suppliers, which the file names only by identifier); sum of these 1.70708e-7 kg
- sodium percarbonate, powder: 1.22496e-8, 2.44121e-8 kg (2 suppliers, which the file names only by identifier); sum of these 3.66617e-8 kg
- sodium phosphate: 3.48202e-8, 1.09306e-8 kg (2 suppliers, which the file names only by identifier); sum of these 4.57508e-8 kg
- sodium pyrophosphate: 1.06855e-8 kg
- sodium silicate, solid: 5.9093e-8, 1.22096e-7 kg (2 suppliers, which the file names only by identifier); sum of these 1.81189e-7 kg
- sodium silicate, spray powder, 80%: 3.22572e-7 kg
- sodium sulfate, anhydrite: 4.15496e-7, 6.78651e-8 kg (2 suppliers, which the file names only by identifier); sum of these 4.83361e-7 kg
- sodium tripolyphosphate: 1.01997e-8 kg
- solvent, organic: 1.50509e-6 kg
- soybean oil, crude: 6.2667e-6 kg
- spent activated carbon, granular: -6.18457e-8 kg
- spent anion exchange resin from potable water production: -2.66786e-6 kg
- spent cation exchange resin from potable water production: -5.89008e-6 kg
- spent nuclear fuel: -2.71067e-9 kg
- spent solvent mixture: -1.2488e-6, -1.1382e-8, -4.87948e-7 kg (3 suppliers, which the file names only by identifier); sum of these -1.74813e-6 kg
- spoil from hard coal mining: -1.00163e-7 kg
- steam, in chemical industry: 5.11924e-5, 0.00029035 kg (2 suppliers, which the file names only by identifier); sum of these 0.000341543 kg
- steel removed by milling, average: 1.16742e-8 kg
- steel, chromium steel 18/8: 0.000843484 kg
- steel, chromium steel 18/8, hot rolled: 0.00239131 kg
- steel, low-alloyed: 0.00539219 kg
- steel, low-alloyed, hot rolled: 0.00564359 kg
- steel, unalloyed: 1.56791e-5 kg
- stone wool: 3.80212e-5 kg
- stone wool, packed: 3.46029e-7 kg
- sulfite: 4.24437e-7 kg
- sulfuric acid: 1.27175e-5, 6.32939e-8 kg (2 suppliers, which the file names only by identifier); sum of these 1.27808e-5 kg
- synthetic rubber: 0.000145718 kg
- tap water: 2.00041e-5, 0.0198683, 0.00105002, 4.92744e-5, 0.0175709, 0.000100987, 0.0156177, 3.0766e-5, 0.000640339, 0.000235515 kg (10 suppliers, which the file names only by identifier); sum of these 0.0551839 kg
- tetrafluoroethylene: 2.27085e-9 kg
- textile, jute: 1.97452e-9 kg
- textile, woven cotton: 3.73466e-6 kg
- thermal energy storage, for adiabatic compressed air energy storage: 6.7471e-14 unit
- thermoforming, with calendering: 2.00918e-9 kg
- tin: 1.28175e-8 kg
- tin plated chromium steel sheet, 2 mm: 5.95957e-11 m2
- titanium: 3.0387e-8 kg
- titanium dioxide: 5.09047e-9, 1.01809e-8 kg (2 suppliers, which the file names only by identifier); sum of these 1.52714e-8 kg
- tower silo, plastic: 1.86787e-6 m3
- transformer, high voltage use: 4.87268e-9 kg
- transport, freight train: 0.000106415, 2.25253e-5, 0.000134401, 6.83458e-6, 9.74195e-5 metric ton*km (5 suppliers, which the file names only by identifier); sum of these 0.000367596 metric ton*km
- transport, freight, light commercial vehicle: 6.08208e-9 metric ton*km
- transport, freight, lorry, unspecified: 1.14701e-8 metric ton*km
- transport, helicopter: 2.51152e-8 hour
- transport, helicopter, LTO cycle: 1.0034e-8 unit
- transport, passenger car: 0.000688902, 5.12918e-9 km (2 suppliers, which the file names only by identifier); sum of these 0.000688907 km
- trisodium phosphate: 6.08862e-6 kg
- ultrafiltration module: 9.11712e-15 unit
- ultraviolet lamp: 2.00037e-11 unit
- uranium hexafluoride: 2.83636e-9 kg
- urea formaldehyde resin: 2.98303e-6 kg
- used cable: -1.45804e-5 kg
- used diesel-electric generating set, 18.5kW: -5.28918e-9 unit
- used industrial electronic device: -3.71461e-8, -1.24359e-7 kg (2 suppliers, which the file names only by identifier); sum of these -1.61505e-7 kg
- used insulation spiral-seam duct rockwool, DN 400: -2.1446e-7, -1.82041e-9 m (2 suppliers, which the file names only by identifier); sum of these -2.1628e-7 m
- used intermodal shipping container, 20-foot: -2.0936e-7 unit
- used intermodal shipping container, 40-foot: -5.35233e-8 unit
- used intermodal shipping container, 40-foot, high-cube: -7.42794e-8 unit
- used intermodal shipping container, 45-foot, high-cube: -1.25443e-8 unit
- used lorry with refrigeration machine, 16 metric ton: -1.68909e-8 unit
- used perfluoropentane: -1.39473e-5 kg
- used printed wiring boards: -1.45974e-6 kg
- used reefer, intermodal shipping container, 40-foot, high-cube: -1.68687e-8 unit
- used refrigeration machine, R134a as refrigerant: -2.4553e-9 unit
- used refrigeration machine, carbon dioxide, liquid as refrigerant: -1.16777e-9 unit
- vegetable oil refinery: 2.27497e-15 unit
- vinyl acetate: 6.67396e-7 kg
- waste aluminium: -8.05844e-5 kg
- waste asphalt: -3.55616e-6 kg
- waste bitumen: -1.65796e-5, -7.2392e-6 kg (2 suppliers, which the file names only by identifier); sum of these -2.38188e-5 kg
- waste bitumen sheet: -2.27754e-5 kg
- waste brick: -5.97172e-5, -7.86327e-7 kg (2 suppliers, which the file names only by identifier); sum of these -6.05035e-5 kg
- waste building wood, chrome preserved: -5.28447e-5 kg
- waste bulk iron, excluding reinforcement: -0.000144342, -6.94135e-5, -1.80364e-6 kg (3 suppliers, which the file names only by identifier); sum of these -0.000215559 kg
- waste cement in concrete and mortar: -9.74622e-6, -2.4708e-5 kg (2 suppliers, which the file names only by identifier); sum of these -3.44542e-5 kg
- waste concrete: -2.74488e-7, -0.00233025, -0.000246051 kg (3 suppliers, which the file names only by identifier); sum of these -0.00257657 kg
- waste concrete gravel: -0.000490404 kg
- waste concrete, not reinforced: -1.19345e-5, -2.66646e-8, -0.000186655 kg (3 suppliers, which the file names only by identifier); sum of these -0.000198617 kg
- waste electric and electronic equipment: -0.000497679 kg
- waste emulsion paint: -6.62326e-9, -0.00022386, -2.1102e-5 kg (3 suppliers, which the file names only by identifier); sum of these -0.000244968 kg
- waste glass: -2.6437e-6, -2.04713e-6, -2.22109e-5, -1.90995e-7, -4.23486e-5, -2.90036e-7, -0.000209319, -4.64426e-8, -2.37388e-7 kg (9 suppliers, which the file names only by identifier); sum of these -0.000279334 kg
- waste glass pane in burnable frame: -2.65643e-5 kg
- waste glass sheet: -2.71166e-6, -6.90389e-8, -1.0449e-5 kg (3 suppliers, which the file names only by identifier); sum of these -1.32297e-5 kg
- waste graphical paper: -2.44476e-7 kg
- waste mineral oil: -4.55366e-7, -4.85094e-5, -1.85724e-5 kg (3 suppliers, which the file names only by identifier); sum of these -6.75373e-5 kg
- waste mineral wool: -0.000429965, -2.04284e-6, -0.000179028 kg (3 suppliers, which the file names only by identifier); sum of these -0.000611035 kg
- waste mineral wool, for final disposal: -3.57787e-5, -2.7073e-5 kg (2 suppliers, which the file names only by identifier); sum of these -6.28517e-5 kg
- waste packaging paper: -9.60139e-6, -3.91916e-7, -6.009e-7, -1.87236e-15, -2.17131e-6, -3.93505e-6, -5.25433e-8, -2.1172e-7 kg (8 suppliers, which the file names only by identifier); sum of these -1.69648e-5 kg
- waste paint: -6.36677e-5, -1.88023e-8, -6.2657e-6 kg (3 suppliers, which the file names only by identifier); sum of these -6.99522e-5 kg
- waste paint on metal: -2.26487e-7, -1.9225e-9 kg (2 suppliers, which the file names only by identifier); sum of these -2.2841e-7 kg
- waste paint on wall: -1.17544e-7 kg
- waste paper, unsorted: -2.1212e-6, -9.84396e-7, -3.10699e-6 kg (3 suppliers, which the file names only by identifier); sum of these -6.21258e-6 kg
- waste paperboard: -1.74746e-8, -1.13972e-8, -2.12579e-6, -1.14434e-7, -2.81034e-7, -6.15696e-9, -6.31429e-8, -1.52799e-9 kg (8 suppliers, which the file names only by identifier); sum of these -2.62096e-6 kg
- waste paperboard, unsorted: -2.22625e-7, -2.22625e-7 kg (2 suppliers, which the file names only by identifier); sum of these -4.4525e-7 kg
- waste plastic, industrial electronics: -1.38063e-9, -9.13877e-8 kg (2 suppliers, which the file names only by identifier); sum of these -9.27683e-8 kg
- waste plastic, mixture: -8.76641e-5, -4.42984e-7, -9.77358e-7, -6.88203e-5, -0.000613697, -5.85738e-6, -9.77827e-6, -2.29736e-6, -2.41931e-6 kg (9 suppliers, which the file names only by identifier); sum of these -0.000791954 kg
- waste polyethylene: -1.01834e-5, -1.94881e-6, -2.67837e-7, -7.12893e-5, -6.80414e-7, -5.14586e-8, -2.81035e-7, -1.13535e-7, -6.85561e-6 kg (9 suppliers, which the file names only by identifier); sum of these -9.16713e-5 kg
- waste polyethylene/polypropylene product: -3.36752e-5, -1.36875e-5, -4.10728e-7 kg (3 suppliers, which the file names only by identifier); sum of these -4.77735e-5 kg
- waste polypropylene: -1.88294e-7, -3.25664e-8, -1.46935e-5, -8.53422e-8, -0.000118231, -4.66087e-7, -1.12844e-6, -4.42593e-7, -1.68888e-5 kg (9 suppliers, which the file names only by identifier); sum of these -0.000152156 kg
- waste polystyrene: -4.04173e-7, -0.000107967, -1.71948e-7, -1.54227e-5, -4.25627e-7, -7.79338e-8, -1.03048e-6, -1.33666e-5 kg (8 suppliers, which the file names only by identifier); sum of these -0.000138867 kg
- waste polystyrene isolation, flame-retardant: -1.90204e-6, -4.82194e-6 kg (2 suppliers, which the file names only by identifier); sum of these -6.72398e-6 kg
- waste polyurethane: -2.53735e-8, -1.93912e-6, -2.27584e-6, -1.15003e-8, -1.59321e-5, -1.52063e-7, -6.28074e-8, -5.96415e-8 kg (8 suppliers, which the file names only by identifier); sum of these -2.04585e-5 kg
- waste polyurethane foam: -2.7046e-5, -2.12144e-8 kg (2 suppliers, which the file names only by identifier); sum of these -2.70672e-5 kg
- waste polyvinylchloride: -1.34782e-5, -5.75535e-8, -2.98478e-7, -1.26982e-7, -3.14322e-7, -7.61004e-7, -1.13895e-5, -9.59617e-6, -7.9733e-5 kg (9 suppliers, which the file names only by identifier); sum of these -0.000115755 kg
- waste polyvinylchloride product: -1.74003e-7, -1.47623e-5, -5.73679e-6 kg (3 suppliers, which the file names only by identifier); sum of these -2.06731e-5 kg
- waste reinforced concrete: -0.0412992, -0.000430007, -0.00799996 kg (3 suppliers, which the file names only by identifier); sum of these -0.0497291 kg
- waste reinforcement steel: -0.00376717, -1.7708e-6, -1.12131e-8, -3.28862e-6 kg (4 suppliers, which the file names only by identifier); sum of these -0.00377224 kg
- waste rubber, unspecified: -2.86406e-6, -6.9059e-5, -6.90584e-5 kg (3 suppliers, which the file names only by identifier); sum of these -0.000140981 kg
- waste textile, soiled: -3.68013e-6, -1.34537e-7 kg (2 suppliers, which the file names only by identifier); sum of these -3.81467e-6 kg
- waste wire plastic: -2.31338e-6 kg
- waste wood, post-consumer: -3.18361e-5, -3.18361e-5 kg (2 suppliers, which the file names only by identifier); sum of these -6.36721e-5 kg
- waste wood, untreated: -7.20085e-8, -6.60707e-7, -9.84917e-7, -1.02451e-5, -0.000105238, -4.17927e-7, -9.81309e-6, -2.76633e-6, -7.93232e-6 kg (9 suppliers, which the file names only by identifier); sum of these -0.00013813 kg
- waste x-ray film: -4.18229e-8 kg
- waste yarn and waste textile: -3.24837e-6 kg
- waste, from silicon wafer production: -1.04532e-7 kg
- wastewater from concrete production: -8.81704e-11, -1.82325e-8 m3 (2 suppliers, which the file names only by identifier); sum of these -1.83207e-8 m3
- wastewater from lorry production: -2.77444e-9, -5.7372e-7 m3 (2 suppliers, which the file names only by identifier); sum of these -5.76494e-7 m3
- wastewater from particle board production: -5.55277e-10 m3
- wastewater from plywood production: -2.34415e-9 m3
- wastewater from vegetable oil refinery: -5.86021e-6 m3
- wastewater treatment facility, capacity 1.6E8l/year: 2.0183e-13 unit
- wastewater, average: -2.45085e-7, -3.68289e-8, -1.33285e-5, -9.75212e-6 m3 (4 suppliers, which the file names only by identifier); sum of these -2.33625e-5 m3
- wastewater, unpolluted: -5.93526e-8, -5.50704e-5 m3 (2 suppliers, which the file names only by identifier); sum of these -5.51297e-5 m3
- water pump operation, diesel: 1.45563e-7 MJ
- water works, capacity 1.1E10l/year: 5.98556e-14, 2.20061e-14, 1.38664e-14, 1.26783e-13 unit (4 suppliers, which the file names only by identifier); sum of these 2.22511e-13 unit
- water, completely softened: 6.40102e-7, 8.90565e-7, 1.18971e-6 kg (3 suppliers, which the file names only by identifier); sum of these 2.72038e-6 kg
- water, decarbonised: 0.0251498, 0.000164527, 0.0213488, 0.0135165, 0.0017212, 0.00128796 kg (6 suppliers, which the file names only by identifier); sum of these 0.0631888 kg
- water, deionised: 7.38663e-9, 2.05198e-6, 6.66138e-6 kg (3 suppliers, which the file names only by identifier); sum of these 8.72075e-6 kg
- wax, lost-wax casting: 2.05626e-5 kg
- welding, arc, steel: 0.0224199 m
- welding, gas, steel: 0.169866 m
- white spirit: 2.59284e-8 kg
- wire drawing, copper: 1.03254e-5, 3.40628e-5 kg (2 suppliers, which the file names only by identifier); sum of these 4.43882e-5 kg
- wire drawing, steel: 0.000229988 kg
- wood ash mixture, pure: -4.74144e-9, -2.30655e-7 kg (2 suppliers, which the file names only by identifier); sum of these -2.35396e-7 kg
- wood chips, dry, measured as dry mass: 2.52022e-6 kg
- wood chips, wet, measured as dry mass: 7.90158e-6, 3.00623e-7 kg (2 suppliers, which the file names only by identifier); sum of these 8.2022e-6 kg
- wooden board factory, organic bonded boards: 3.22589e-15, 1.67438e-15 unit (2 suppliers, which the file names only by identifier); sum of these 4.90027e-15 unit
- zinc: 0.000248166 kg
- zinc coat, coils: 4.02173e-7, 6.99409e-6 m2 (2 suppliers, which the file names only by identifier); sum of these 7.39626e-6 m2
- zinc coat, pieces: 0.000117027 m2
- zircon: 1.40318e-5 kg

## Inputs from nature
- Aluminium [natural resource, in ground]: 4.6194e-11 kg
- Anhydrite [natural resource, in ground]: 7.57189e-11 kg
- Barium [natural resource, in ground]: 4.93501e-13 kg
- Calcite [natural resource, in ground]: 2.62194e-9 kg
- Chromium [natural resource, in ground]: 3.90385e-15 kg
- Clay, bentonite [natural resource, in ground]: 7.58947e-10 kg
- Clay, unspecified [natural resource, in ground]: 2.12872e-14 kg
- Coal, brown [natural resource, in ground]: 4.53474e-12 kg
- Coal, hard, unspecified [natural resource, in ground]: 4.84864e-7 kg
- Copper [natural resource, in ground]: 3.15886e-11 kg
- Dolomite [natural resource, in ground]: 3.32665e-11 kg
- Energy, gross calorific value, in biomass [natural resource, biotic]: 9.03056e-7 MJ
- Energy, potential (in hydropower reservoir), converted [natural resource, in water]: 7.10274e-7 MJ
- Feldspar [natural resource, in ground]: 2.40977e-21 kg
- Fluorspar [natural resource, in ground]: 6.25132e-12 kg
- Gas, natural [natural resource, in ground]: 5.39008e-6 Sm3
- Granite [natural resource, in ground]: 1.00027e-19 kg
- Gravel [natural resource, in ground]: 0.104974 kg
- Iron [natural resource, in ground]: 2.70823e-9 kg
- Lead [natural resource, in ground]: 2.04303e-12 kg
- Magnesite [natural resource, in ground]: 7.37252e-21 kg
- Manganese [natural resource, in ground]: 3.49308e-12 kg
- Mercury [natural resource, in ground]: 7.46768e-15 kg
- Nickel [natural resource, in ground]: 5.02352e-17 kg
- Occupation, construction site [natural resource, land]: 7.4604e-5 m2*year
- Occupation, dump site [natural resource, land]: 9.89337e-7 m2*year
- Occupation, industrial area [natural resource, land]: 0.00101271 m2*year
- Occupation, lake, artificial [natural resource, land]: 6.32873e-6 m2*year
- Occupation, mineral extraction site [natural resource, land]: 0.000873423 m2*year
- Occupation, seabed, infrastructure [natural resource, land]: 3.13734e-6 m2*year
- Occupation, traffic area, rail/road embankment [natural resource, land]: 0.00203682 m2*year
- Occupation, traffic area, road network [natural resource, land]: 0.00965673 m2*year
- Occupation, urban, discontinuously built [natural resource, land]: 5.20648e-5 m2*year
- Occupation, urban/industrial fallow (non-use) [natural resource, land]: 0.000517386 m2*year
- Oil, crude [natural resource, in ground]: 7.48842e-6 kg
- Olivine [natural resource, in ground]: 2.54078e-11 kg
- Peat [natural resource, biotic]: 6.23749e-10 kg
- Phosphorus [natural resource, in ground]: 2.17814e-17 kg
- Sand, unspecified [natural resource, in ground]: 0.051831 kg
- Shale [natural resource, in ground]: 2.14357e-10 kg
- Sodium chloride [natural resource, in ground]: 4.03614e-9 kg
- Sodium nitrate [natural resource, in ground]: 2.21458e-20 kg
- Sulfur [natural resource, in ground]: 6.49234e-10 kg
- Sylvite [natural resource, in ground]: 1.19187e-12 kg
- Talc [natural resource, in ground]: 8.77025e-33 kg
- Titanium [natural resource, in ground]: 1.32945e-37 kg
- Transformation, from annual crop [natural resource, land]: 6.35836e-9 m2
- Transformation, from forest, unspecified [natural resource, land]: 9.07282e-6 m2
- Transformation, from industrial area [natural resource, land]: 2.64838e-7 m2
- Transformation, from pasture, man made [natural resource, land]: 3.38448e-6 m2
- Transformation, from seabed, unspecified [natural resource, land]: 7.8568e-8 m2
- Transformation, from unspecified [natural resource, land]: 4.68257e-5 m2
- Transformation, from unspecified, natural (non-use) [natural resource, land]: 1.58187e-7 m2
- Transformation, from wetland, inland (non-use) [natural resource, land]: 4.22177e-6 m2
- Transformation, to annual crop [natural resource, land]: 4.84598e-6 m2
- Transformation, to dump site, residual material landfill [natural resource, land]: 9.89337e-9 m2
- Transformation, to industrial area [natural resource, land]: 2.13844e-5 m2
- Transformation, to lake, artificial [natural resource, land]: 6.32873e-7 m2
- Transformation, to mineral extraction site [natural resource, land]: 1.13505e-5 m2
- Transformation, to seabed, infrastructure [natural resource, land]: 7.8568e-8 m2
- Transformation, to traffic area, rail/road embankment [natural resource, land]: 5.04713e-6 m2
- Transformation, to traffic area, road network [natural resource, land]: 1.21004e-5 m2
- Transformation, to unspecified [natural resource, land]: 6.35584e-7 m2
- Transformation, to urban, discontinuously built [natural resource, land]: 1.0413e-6 m2
- Transformation, to urban/industrial fallow (non-use) [natural resource, land]: 6.89848e-6 m2
- Uranium [natural resource, in ground]: 2.99209e-11 kg
- Water, cooling, unspecified natural origin [natural resource, in water]: 2.14241e-5 m3
- Water, lake [natural resource, in water]: 8.21462e-6 m3
- Water, river [natural resource, in water]: 0.000185754 m3
- Water, salt, ocean [natural resource, in water]: 3.40353e-6 m3
- Water, unspecified natural origin [natural resource, in water]: 0.000126765 m3
- Water, well, in ground [natural resource, in water]: 0.000437777 m3
- Wood, unspecified, standing [natural resource, biotic]: 4.17423e-14 m3
- Zinc [natural resource, in ground]: 8.33822e-14 kg

## Emissions to nature
- 2-Propanol [air, unspecified]: 5.60423e-9 kg
- 2-Propanol [air, urban air close to ground]: 1.1005e-8 kg
- Acetaldehyde [air, unspecified]: 2.03712e-11 kg
- Aerosols, radioactive, unspecified [air, non-urban air or from high stacks]: 1.60505e-10 kBq
- Aldehydes, unspecified [air, urban air close to ground]: 2.35941e-20 kg
- Ammonia [air, unspecified]: 9.54406e-10 kg
- Ammonia [air, urban air close to ground]: 2.55494e-15 kg
- Antimony ion [air, urban air close to ground]: 1.58481e-20 kg
- Antimony-124 [air, non-urban air or from high stacks]: 5.69975e-14 kBq
- Antimony-125 [air, non-urban air or from high stacks]: 2.80787e-12 kBq
- Arsenic ion [air, unspecified]: 3.33954e-13 kg
- Arsenic ion [air, urban air close to ground]: 2.00941e-15 kg
- Barium-140 [air, non-urban air or from high stacks]: 3.80383e-14 kBq
- Benzene [air, unspecified]: 5.25168e-10 kg
- Benzene [air, urban air close to ground]: 1.6384e-10 kg
- Benzene, ethyl- [air, unspecified]: 1.00186e-11 kg
- Benzene, ethyl- [air, urban air close to ground]: 4.98423e-10 kg
- Benzene, hexachloro- [air, unspecified]: 2.40447e-18 kg
- Benzo(a)pyrene [air, unspecified]: 1.12521e-10 kg
- Bromine [air, unspecified]: 2.00372e-11 kg
- Cadmium II [air, unspecified]: 3.1481e-11 kg
- Cadmium II [air, urban air close to ground]: 2.77787e-16 kg
- Caesium-137 [air, non-urban air or from high stacks]: 8.73561e-13 kBq
- Calcium [air, unspecified]: 1.95363e-9 kg
- Carbon dioxide, fossil [air, non-urban air or from high stacks]: 6.48082e-5 kg
- Carbon dioxide, fossil [air, unspecified]: 0.00364042 kg
- Carbon dioxide, fossil [air, urban air close to ground]: 1.23785e-5 kg
- Carbon dioxide, non-fossil [air, unspecified]: 3.5733e-5 kg
- Carbon dioxide, non-fossil [air, urban air close to ground]: 2.08861e-8 kg
- Carbon disulfide [air, urban air close to ground]: 1.28985e-15 kg
- Carbon monoxide, fossil [air, non-urban air or from high stacks]: 1.73982e-9 kg
- Carbon monoxide, fossil [air, unspecified]: 3.77646e-5 kg
- Carbon monoxide, fossil [air, urban air close to ground]: 1.87908e-8 kg
- Carbon monoxide, non-fossil [air, unspecified]: 6.67907e-8 kg
- Carbon monoxide, non-fossil [air, urban air close to ground]: 3.17089e-11 kg
- Carbon-14 [air, non-urban air or from high stacks]: 2.94981e-9 kBq
- Chlorine [air, unspecified]: 6.01116e-11 kg
- Chlorine [air, urban air close to ground]: 1.37571e-13 kg
- Chloroethylene [air, urban air close to ground]: 2.35967e-15 kg
- Chromium III [air, unspecified]: 4.07645e-10 kg
- Chromium III [air, urban air close to ground]: 2.70114e-11 kg
- Chromium VI [air, unspecified]: 1.33581e-14 kg
- Cobalt-58 [air, non-urban air or from high stacks]: 1.96791e-12 kBq
- Cobalt-60 [air, non-urban air or from high stacks]: 9.08359e-12 kBq
- Copper ion [air, unspecified]: 6.96118e-10 kg
- Copper ion [air, urban air close to ground]: 5.18542e-14 kg
- Cyanide [air, urban air close to ground]: 1.91484e-23 kg
- Dinitrogen monoxide [air, non-urban air or from high stacks]: 1.24715e-10 kg
- Dinitrogen monoxide [air, unspecified]: 1.14476e-9 kg
- Dinitrogen monoxide [air, urban air close to ground]: 2.16696e-13 kg
- Dioxins, measured as 2,3,7,8-tetrachlorodibenzo-p-dioxin [air, unspecified]: 8.57698e-16 kg
- Dioxins, measured as 2,3,7,8-tetrachlorodibenzo-p-dioxin [air, urban air close to ground]: 9.91731e-37 kg
- Ethane, 1,1-difluoro-, HFC-152a [air, urban air close to ground]: 2.62675e-6 kg
- Ethane, 1,2-dichloro- [air, urban air close to ground]: 2.85502e-15 kg
- Ethane, hexafluoro-, HFC-116 [air, unspecified]: 1.62024e-10 kg
- Ethylene [air, urban air close to ground]: 5.38001e-11 kg
- Fluorine [air, unspecified]: 1.66977e-11 kg
- Fluorine [air, urban air close to ground]: 2.76029e-15 kg
- Formaldehyde [air, unspecified]: 4.51013e-9 kg
- Heat, waste [air, non-urban air or from high stacks]: 1.17314e-5 MJ
- Heptane [air, urban air close to ground]: 4.78568e-9 kg
- Hydrocarbons, aliphatic, alkanes, cyclic [air, urban air close to ground]: 4.91086e-11 kg
- Hydrocarbons, aliphatic, alkanes, unspecified [air, unspecified]: 3.34509e-6 kg
- Hydrocarbons, aliphatic, unsaturated [air, unspecified]: 1.03526e-9 kg
- Hydrocarbons, aromatic [air, urban air close to ground]: 1.42529e-10 kg
- Hydrocarbons, chlorinated [air, urban air close to ground]: 3.98928e-14 kg
- Hydrochloric acid [air, non-urban air or from high stacks]: 1.64856e-8 kg
- Hydrochloric acid [air, unspecified]: 3.71643e-6 kg
- Hydrochloric acid [air, urban air close to ground]: 2.57799e-10 kg
- Hydrogen [air, urban air close to ground]: 2.26835e-10 kg
- Hydrogen fluoride [air, non-urban air or from high stacks]: 3.85661e-8 kg
- Hydrogen fluoride [air, unspecified]: 3.00667e-6 kg
- Hydrogen fluoride [air, urban air close to ground]: 9.68004e-12 kg
- Hydrogen sulfide [air, urban air close to ground]: 9.12017e-14 kg
- Iodine-131 [air, non-urban air or from high stacks]: 4.33796e-11 kBq
- Iodine-133 [air, non-urban air or from high stacks]: 2.1839e-10 kBq
- Krypton-85m [air, non-urban air or from high stacks]: 1.18435e-6 kBq
- Lead II [air, unspecified]: 9.89404e-9 kg
- Lead II [air, urban air close to ground]: 4.86827e-14 kg
- Magnesium [air, unspecified]: 1.20223e-10 kg
- Manganese II [air, unspecified]: 3.47588e-9 kg
- Mercury II [air, non-urban air or from high stacks]: 8.22924e-12 kg
- Mercury II [air, unspecified]: 3.72645e-11 kg
- Mercury II [air, urban air close to ground]: 6.60448e-15 kg
- Methane, dichloro-, HCC-30 [air, urban air close to ground]: 5.12807e-16 kg
- Methane, fossil [air, non-urban air or from high stacks]: 5.07877e-12 kg
- Methane, fossil [air, unspecified]: 2.78699e-10 kg
- Methane, fossil [air, urban air close to ground]: 1.11386e-7 kg
- Methane, non-fossil [air, unspecified]: 5.0093e-10 kg
- Methane, non-fossil [air, urban air close to ground]: 1.87959e-10 kg
- Methane, tetrafluoro-, R-14 [air, unspecified]: 1.71938e-9 kg
- Methanol [air, urban air close to ground]: 5.04818e-10 kg
- NMVOC, non-methane volatile organic compounds [air, non-urban air or from high stacks]: 3.49539e-12 kg
- NMVOC, non-methane volatile organic compounds [air, unspecified]: 0.00026647 kg
- NMVOC, non-methane volatile organic compounds [air, urban air close to ground]: 1.90955e-8 kg
- Nickel II [air, unspecified]: 2.23206e-9 kg
- Nickel II [air, urban air close to ground]: 4.91086e-11 kg
- Niobium-95 [air, non-urban air or from high stacks]: 3.437e-6 kBq
- Nitrogen oxides [air, non-urban air or from high stacks]: 1.63553e-8 kg
- Nitrogen oxides [air, unspecified]: 4.708e-5 kg
- Nitrogen oxides [air, urban air close to ground]: 2.72849e-8 kg
- Noble gases, radioactive, unspecified [air, non-urban air or from high stacks]: 3.10786e-5 kBq
- PAH, polycyclic aromatic hydrocarbons [air, unspecified]: 1.89063e-8 kg
- Particulate Matter, < 2.5 um [air, non-urban air or from high stacks]: 1.09706e-6 kg
- Particulate Matter, < 2.5 um [air, unspecified]: 1.12229e-5 kg
- Particulate Matter, < 2.5 um [air, urban air close to ground]: 1.0187e-9 kg
- Particulate Matter, > 10 um [air, non-urban air or from high stacks]: 1.23332e-5 kg
- Particulate Matter, > 10 um [air, unspecified]: 0.000122077 kg
- Particulate Matter, > 10 um [air, urban air close to ground]: 1.30393e-9 kg
- Particulate Matter, > 2.5 um and < 10um [air, non-urban air or from high stacks]: 4.70446e-6 kg
- Particulate Matter, > 2.5 um and < 10um [air, unspecified]: 3.50726e-5 kg
- Particulate Matter, > 2.5 um and < 10um [air, urban air close to ground]: 1.75209e-9 kg
- Phenol, pentachloro- [air, unspecified]: 2.70502e-15 kg
- Phosphorus [air, unspecified]: 1.00186e-10 kg
- Potassium I [air, unspecified]: 7.81451e-9 kg
- Propene [air, urban air close to ground]: 3.9851e-11 kg
- Propylene oxide [air, urban air close to ground]: 9.18769e-10 kg
- Radioactive species, other beta emitters [air, non-urban air or from high stacks]: 1.04035e-11 kBq
- Selenium IV [air, unspecified]: 2.92212e-14 kg
- Selenium IV [air, urban air close to ground]: 5.92171e-18 kg
- Silver I [air, non-urban air or from high stacks]: 4.69854e-12 kg
- Silver I [air, urban air close to ground]: 1.70984e-16 kg
- Silver-110 [air, non-urban air or from high stacks]: 3.75583e-13 kBq
- Sodium [air, unspecified]: 4.3414e-10 kg
- Styrene [air, urban air close to ground]: 1.64071e-12 kg
- Sulfate [air, urban air close to ground]: 3.02973e-20 kg
- Sulfur dioxide [air, non-urban air or from high stacks]: 7.82457e-8 kg
- Sulfur dioxide [air, unspecified]: 2.05953e-5 kg
- Sulfur dioxide [air, urban air close to ground]: 3.62288e-8 kg
- Toluene [air, unspecified]: 1.93255e-10 kg
- Toluene [air, urban air close to ground]: 4.59891e-10 kg
- Vanadium V [air, unspecified]: 1.27102e-8 kg
- Water [air, non-urban air or from high stacks]: 5.55225e-6 m3
- Water [air, unspecified]: 7.2012e-5 m3
- Water [air, urban air close to ground]: 1.62684e-6 m3
- Xenon-133 [air, non-urban air or from high stacks]: 7.24768e-5 kBq
- Xenon-135 [air, non-urban air or from high stacks]: 1.99191e-5 kBq
- Xylene [air, unspecified]: 9.30686e-11 kg
- Xylene [air, urban air close to ground]: 4.43593e-10 kg
- Zinc II [air, unspecified]: 8.45763e-9 kg
- Zinc II [air, urban air close to ground]: 5.51486e-15 kg
- Zirconium-95 [air, non-urban air or from high stacks]: 6.93569e-12 kBq
- m-Xylene [air, unspecified]: 4.00744e-11 kg
- Hydrocarbons, unspecified [soil, unspecified]: 4.57432e-6 kg
- Oils, unspecified [soil, unspecified]: 1.03787e-6 kg
- AOX, Adsorbable Organic Halogen [water, ground-]: 5.17961e-9 kg
- AOX, Adsorbable Organic Halogen [water, surface water]: 1.44398e-17 kg
- Acidity, unspecified [water, surface water]: 1.42649e-11 kg
- Aluminium III [water, surface water]: 1.02715e-11 kg
- Aluminium III [water, unspecified]: 1.26378e-7 kg
- Ammonium [water, ground-]: 2.00879e-9 kg
- Ammonium [water, surface water]: 2.66248e-11 kg
- Aniline [water, ground-]: 3.01545e-10 kg
- Antimony ion [water, ground-]: 7.02101e-12 kg
- Antimony-122 [water, surface water]: 1.08475e-10 kBq
- Antimony-124 [water, surface water]: 3.08329e-6 kBq
- Antimony-125 [water, surface water]: 5.00378e-9 kBq
- Arsenic ion [water, ground-]: 5.28046e-9 kg
- Arsenic ion [water, surface water]: 5.21421e-13 kg
- BOD5, Biological Oxygen Demand [water, ground-]: 7.67804e-8 kg
- BOD5, Biological Oxygen Demand [water, surface water]: 4.27797e-8 kg
- BOD5, Biological Oxygen Demand [water, unspecified]: 2.12825e-9 kg
- Benzene [water, surface water]: 9.65785e-27 kg
- Bromate [water, surface water]: 4.97999e-15 kg
- COD, Chemical Oxygen Demand [water, ground-]: 3.06565e-7 kg
- COD, Chemical Oxygen Demand [water, surface water]: 2.80566e-7 kg
- COD, Chemical Oxygen Demand [water, unspecified]: 2.12825e-9 kg
- Cadmium II [water, ground-]: 8.82862e-10 kg
- Cadmium II [water, surface water]: 2.58259e-13 kg
- Cadmium II [water, unspecified]: 6.31888e-11 kg
- Caesium-134 [water, surface water]: 1.76188e-8 kBq
- Caesium-136 [water, surface water]: 3.37185e-11 kBq
- Caesium-137 [water, surface water]: 2.48265e-8 kBq
- Calcium II [water, surface water]: 7.02587e-10 kg
- Carbon-14 [water, surface water]: 3.437e-7 kBq
- Carbonate [water, surface water]: 1.03662e-9 kg
- Cerium-141 [water, surface water]: 2.11191e-11 kBq
- Cerium-144 [water, surface water]: 5.78374e-11 kBq
- Chlorate [water, surface water]: 9.35914e-13 kg
- Chloride [water, surface water]: 1.34181e-9 kg
- Chloride [water, unspecified]: 1.12315e-6 kg
- Chlorinated solvents, unspecified [water, surface water]: 5.03308e-14 kg
- Chlorine [water, ground-]: 6.22321e-10 kg
- Chlorine [water, surface water]: 1.22993e-14 kg
- Chloroethylene [water, surface water]: 4.97581e-17 kg
- Chromium III [water, ground-]: 1.02041e-9 kg
- Chromium III [water, surface water]: 4.13094e-12 kg
- Chromium VI [water, ground-]: 1.02179e-10 kg
- Chromium VI [water, unspecified]: 5.91613e-10 kg
- Chromium-51 [water, surface water]: 9.07159e-10 kBq
- Cobalt II [water, surface water]: 5.16568e-13 kg
- Cobalt-57 [water, surface water]: 1.07035e-9 kBq
- Cobalt-58 [water, surface water]: 1.36794e-7 kBq
- Cobalt-60 [water, surface water]: 8.40897e-8 kBq
- Copper ion [water, ground-]: 1.45854e-9 kg
- Copper ion [water, surface water]: 6.59678e-13 kg
- Copper ion [water, unspecified]: 1.26378e-9 kg
- Cyanide [water, ground-]: 1.88126e-10 kg
- Cyanide [water, surface water]: 2.56647e-16 kg
- DOC, Dissolved Organic Carbon [water, surface water]: 1.03425e-7 kg
- DOC, Dissolved Organic Carbon [water, unspecified]: 1.98899e-8 kg
- Dissolved solids [water, ground-]: 1.11091e-6 kg
- Dissolved solids [water, surface water]: 2.06044e-10 kg
- Ethane, 1,2-dichloro- [water, surface water]: 4.49923e-17 kg
- Fluoride [water, ground-]: 8.86038e-10 kg
- Fluoride [water, surface water]: 1.03099e-13 kg
- Fluoride [water, unspecified]: 1.99611e-8 kg
- Hydrocarbons, unspecified [water, surface water]: 2.89808e-10 kg
- Hydrocarbons, unspecified [water, unspecified]: 4.57432e-6 kg
- Hydrogen-3, Tritium [water, surface water]: 0.0160171 kBq
- Iodine-131 [water, surface water]: 6.00641e-7 kBq
- Iodine-133 [water, surface water]: 4.99178e-11 kBq
- Iron ion [water, ground-]: 1.15056e-9 kg
- Iron ion [water, surface water]: 9.82193e-10 kg
- Iron ion [water, unspecified]: 2.12642e-9 kg
- Iron-59 [water, surface water]: 2.80299e-6 kBq
- Lanthanum-140 [water, surface water]: 5.93973e-11 kBq
- Lead II [water, ground-]: 4.42593e-11 kg
- Lead II [water, surface water]: 5.18797e-13 kg
- Lead II [water, unspecified]: 1.68503e-9 kg
- Magnesium [water, surface water]: 4.21877e-10 kg
- Manganese II [water, ground-]: 9.11563e-10 kg
- Manganese II [water, surface water]: 1.54943e-10 kg
- Manganese II [water, unspecified]: 1.07842e-8 kg
- Manganese-54 [water, surface water]: 1.57193e-9 kBq
- Mercury II [water, ground-]: 1.0759e-11 kg
- Mercury II [water, surface water]: 6.79156e-14 kg
- Molybdenum-99 [water, surface water]: 7.19968e-13 kBq
- Nickel II [water, ground-]: 1.33775e-9 kg
- Nickel II [water, surface water]: 5.20145e-13 kg
- Nickel II [water, unspecified]: 1.83669e-8 kg
- Niobium-95 [water, surface water]: 3.68384e-10 kBq
- Nitrate [water, ground-]: 5.62326e-10 kg
- Nitrate [water, surface water]: 2.08263e-9 kg
- Nitrogen [water, ground-]: 5.04925e-8 kg
- Nitrogen [water, surface water]: 6.81436e-9 kg
- Oils, unspecified [water, ground-]: 1.04439e-8 kg
- Oils, unspecified [water, surface water]: 2.91818e-10 kg
- Oils, unspecified [water, unspecified]: 1.46875e-9 kg
- PAH, polycyclic aromatic hydrocarbons [water, unspecified]: 9.28727e-11 kg
- Phenol [water, ground-]: 5.03053e-10 kg
- Phenol [water, surface water]: 3.03843e-12 kg
- Phosphate [water, surface water]: 1.58671e-9 kg
- Phosphorus [water, ground-]: 4.56787e-9 kg
- Phosphorus [water, surface water]: 2.32301e-10 kg
- Potassium I [water, surface water]: 6.85462e-10 kg
- Radioactive species, alpha emitters [water, surface water]: 3.62384e-12 kBq
- Ruthenium-103 [water, surface water]: 3.41985e-11 kBq
- Selenium IV [water, ground-]: 1.93859e-10 kg
- Silicon [water, surface water]: 4.75778e-10 kg
- Silver-110 [water, surface water]: 5.31576e-10 kBq
- Sodium I [water, surface water]: 1.46368e-9 kg
- Sodium I [water, unspecified]: 3.6481e-6 kg
- Sodium-24 [water, surface water]: 1.19755e-9 kBq
- Strontium [water, surface water]: 9.791e-17 kg
- Strontium-89 [water, surface water]: 4.3798e-10 kBq
- Strontium-90 [water, surface water]: 1.55993e-10 kBq
- Sulfate [water, surface water]: 2.82505e-9 kg
- Sulfate [water, unspecified]: 9.52044e-6 kg
- Sulfide [water, ground-]: 1.24551e-9 kg
- Sulfide [water, surface water]: 3.05226e-14 kg
- Suspended solids, unspecified [water, ground-]: 9.23536e-8 kg
- Suspended solids, unspecified [water, surface water]: 2.23861e-8 kg
- Suspended solids, unspecified [water, unspecified]: 3.42066e-8 kg
- TOC, Total Organic Carbon [water, ground-]: 1.89592e-8 kg
- TOC, Total Organic Carbon [water, surface water]: 1.03425e-7 kg
- TOC, Total Organic Carbon [water, unspecified]: 9.30686e-10 kg
- Technetium-99m [water, surface water]: 3.37185e-10 kBq
- Tellurium-123m [water, surface water]: 1.88392e-10 kBq
- Tellurium-132 [water, surface water]: 1.01035e-11 kBq
- Tin ion [water, surface water]: 6.7943e-20 kg
- Tin ion [water, unspecified]: 1.05315e-8 kg
- Vanadium V [water, ground-]: 1.83603e-10 kg
- Water [water, ocean]: 3.41924e-6 m3
- Water [water, surface water]: 4.90388e-5 m3
- Water [water, unspecified]: 0.000536433 m3
- Zinc II [water, ground-]: 2.35322e-9 kg
- Zinc II [water, surface water]: 2.28531e-12 kg
- Zinc II [water, unspecified]: 3.79133e-9 kg
- Zinc-65 [water, surface water]: 2.20235e-7 kBq
- Zirconium-95 [water, surface water]: 1.40149e-6 kBq
