# treatment of waste polypropylene, municipal incineration with fly ash extraction

Dataset: EcoSpold 2, unit process
Geography: CH
Time period: 2006-01-01 to 2022-12-31
Technology level: current
Classification: ISIC rev.4 ecoinvent: 3821:Treatment and disposal of non-hazardous waste
Synonyms: municipal waste incineration
Scenario: Business-as-Usual
System model: Allocation at the point of substitution
Share of production covered: 1.8 %
Generated by: Gabor Doka
Published in: Doka G. 2015
Database: ecoinvent
isCopyrightProtected: true

## General comment
This dataset represents the activity of waste disposal of waste polypropylene in a municipal solid waste incinerator (MSWI) // Recommended use of this dataset: For PP, which goes to disposal as part of communal waste mixture. // // Waste composition (wet, in ppm): upper heating value 36.16 MJ/kg; lower heating value 32.78 MJ/kg; H2O 159000; O 32454; H 103430; C 694120; S 360.46; N 1095.3; P n.a.; B n.a.; Cl 1234.1; Br 8.0972; F 12.146; I n.a.; Ag n.a.; As 1.5385; Ba 202.43; Cd 28.663; Co 1.417; Cr 10.526; Cu 34.93; Hg 0.040486; Mn 25.371; Mo n.a.; Ni 0.80972; Pb 19.079; Sb 8.5021; Se 1.7004; Sn 3.2205; V 1862.4; Zn 288.78; Be 0.40486; Sc n.a.; Sr 71.661; Ti 809.72; Tl 0.32389; W n.a.; Si n.a.; Fe 1295.6; Ca 2186.3; Al 161.94; K n.a.; Mg 80.972; Na 1186.6; // Share of carbon in waste that is biogenic 0%. // Share of metals in waste not oxidised and bulk-recyclable (exclude very small or thin parts) Iron: 0%; Alu: 0%; Copper: 0%. // Recovery of metal scrap from bottom ash to recycling: 0g iron scrap, 0g aluminium scrap, 0g copper scrap. From this waste, the FLUWA process in the technology mix recovers 0.000346kg (DM) of a hydroxide sludge to be recycled in zinc furnaces. // Ultimately one kg of this waste produces 0.02521 kg of bottom ash (can include some washed ash) and 0.004552 kg of residues, which are landfilled (technology mix). Additional solidification of residues with 0.001821 kg of cement.Net energy production: 4.21MJ/kg electric energy and 8.15MJ/kg thermal energy. //

## Included activities start
waste incineration from waste reception gate and delivery into waste bunker at incinerator plant site (without transports to the incinerator)

## Included activities end
Waste-specific short-term emissions to water from leachate. Long-term emissions from landfill to ground water.

## Geography
Specific to the technology mix encountered in Switzerland in 2012.

## Technology
average Swiss MSWI plants in 2010 (grate incinerators) with electrostatic precipitator for fly ash (ESP), wet flue gas scrubber and 25% SNCR , 42.77% SCR-high dust , 32.68% SCR-low dust -DeNOx facilities and 0% without Denox (weighted according to mass of burnt waste, representing Swiss average). Efficiency of iron scrap separation from slag : 58%. Efficiency of non-ferrous scrap separation from slag : 31%. The technology mix for this dataset includes a filter ash treatment (FLUWA) of a share of 46.22%. Gross electric efficiency technology mix 15.84% and Gross thermal efficiency technology mix 28.51%

## Time period
Waste composition as given in literature reference, theoretical data or other source. Transfer coefficients for modern MSWI.

## Reference product
- electricity, for reuse in municipal waste incineration only: 1 kWh; name E_el_prod_MSWI; By-product classification allocatable product; CPC 17100: Electrical energy; lognormal variance with pedigree 0.053613, pedigree (1,1,1,1,1)
  Net electricity generated from this waste and used in internal MSWI plant energy redistribution.
  Uncertainty: uncertainty is calculated from uncertainties in waste composition and uncertainties in energy efficiency and the uncertainty in internal energy demand
  production volume 6.0162e7 kWh
    calculated in proportion to reference product waste input to incinerator
  property exergy 3.6 MJ; name E_el_prod_MSWI_exergy
    This exergy property is based on the exergy content of the product.
  property price 0.1 EUR2005
    Estimated to be the same price as in case of electricity, medium voltage.
  property true value relation 3.6; name E_el_prod_MSWI_true_value_relation
    property to calculate "true value" from
  properties: carbon allocation 0 kg, carbon content 0

## Inputs from technosphere
- acetic acid, without water, in 98% solution state: 2.90018e-9 kg
- acetylene: 1.21302e-7, 5.75835e-7 kg (2 suppliers, which the file names only by identifier); sum of these 6.97137e-7 kg
- acrylonitrile-butadiene-styrene copolymer: 0.00346252 kg
- air compressor, screw-type compressor, 4kW: 5.27874e-9 unit
- alkyd paint, white, without solvent, in 60% solution state: 3.05838e-7, 1.45185e-6 kg (2 suppliers, which the file names only by identifier); sum of these 1.75769e-6 kg
- aluminium scrap, post-consumer: -1.2648e-5 kg
- aluminium, cast alloy: 0.00104593 kg
- aluminium, primary, ingot: 8.68848e-7, 1.38799e-7, 9.16052e-8 kg (3 suppliers, which the file names only by identifier); sum of these 1.09925e-6 kg
- aluminium, wrought alloy: 6.256e-5 kg
- anionic resin: 3.34964e-6 kg
- brass: 8.96626e-6, 2.93894e-5 kg (2 suppliers, which the file names only by identifier); sum of these 3.83556e-5 kg
- bronze: 6.25772e-7 kg
- building, hall: 2.56811e-9 m2
- building, hall, steel construction: 1.00919e-10 m2
- building, multi-storey: 3.92806e-9 m3
- cable, three-conductor cable: 2.29352e-7 m
- cable, unspecified: 0.00010234 kg
- carbon dioxide, liquid: 1.53023e-8, 3.22118e-9 kg (2 suppliers, which the file names only by identifier); sum of these 1.85235e-8 kg
- cast iron: 0.000629359 kg
- cationic resin: 7.39532e-6 kg
- cement, Portland: 9.20688e-8 kg
- ceramic tile: 5.20904e-7 kg
- chemical, organic: 6.41284e-8 kg
- chromium: 5.39646e-6 kg
- chromium steel pipe: 1.14835e-6 kg
- compressed air, 1000 kPa gauge: 0.000427205, 0.000173838 m3 (2 suppliers, which the file names only by identifier); sum of these 0.000601043 m3
- compressed air, 800 kPa gauge: 1.29773e-7, 5.28072e-8 m3 (2 suppliers, which the file names only by identifier); sum of these 1.8258e-7 m3
- concrete block: 3.16863e-5, 2.50164e-7, 5.5231e-7 kg (3 suppliers, which the file names only by identifier); sum of these 3.24888e-5 kg
- concrete, normal strength: 8.84978e-8 m3
- copper scrap, sorted, pressed: -1.11787e-6 kg
- copper, cathode: 0.000343144 kg
- corrugated board box: 3.3463e-5, 7.76712e-5, 6.83774e-5, 1.2465e-6 kg (4 suppliers, which the file names only by identifier); sum of these 0.000180758 kg
- diesel: 7.33834e-6 kg
- diesel, burned in agricultural machinery: 1.88231e-6 MJ
- diesel, burned in building machine: 8.83238e-7 MJ
- electricity, high voltage: 0.0243338 kWh
- electricity, low voltage: 4.22643e-6, 0.00031859 kWh (2 suppliers, which the file names only by identifier); sum of these 0.000322816 kWh
- electricity, medium voltage: 7.58366e-7, 2.13438e-6, 0.00945051, 2.0403e-7, 5.68382e-8, 6.93475e-7, 7.45529e-5, 9.6292e-8, 3.66587e-6, 2.32629e-5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 kWh (47 suppliers, which the file names only by identifier); sum of these 0.00983776 kWh
- electronic component, passive, unspecified: 1.17156e-7 kg
- electronics, for control units: 1.24534e-5 kg
- energy and auxilliary inputs, metal working factory: 4.59338e-12, 1.02431e-12 kg (2 suppliers, which the file names only by identifier); sum of these 5.6177e-12 kg
- epoxy resin, liquid: 2.24078e-5, 4.7203e-6 kg (2 suppliers, which the file names only by identifier); sum of these 2.71281e-5 kg
- excavation, hydraulic digger: 1.56812e-7 m3
- extrusion, plastic film: 0.00150297, 2.67479e-7 kg (2 suppliers, which the file names only by identifier); sum of these 0.00150323 kg
- extrusion, plastic pipes: 0.000507268, 5.02619e-10 kg (2 suppliers, which the file names only by identifier); sum of these 0.000507269 kg
- ferrite: 2.17691e-6 kg
- flat glass, coated: 2.92752e-6, 5.92785e-6 kg (2 suppliers, which the file names only by identifier); sum of these 8.85537e-6 kg
- flat glass, uncoated: 5.48223e-5, 0.000259015 kg (2 suppliers, which the file names only by identifier); sum of these 0.000313837 kg
- fleece, polyethylene: 4.31694e-10 kg
- formaldehyde: 7.12117e-7, 2.97742e-6 kg (2 suppliers, which the file names only by identifier); sum of these 3.68954e-6 kg
- glass fibre: 5.52308e-6 kg
- glass fibre reinforced plastic, polyamide, injection moulded: 3.98442e-6 kg
- gold: 1.1662e-10 kg
- heat, central or small-scale, natural gas: 0.00275913 MJ
- heat, central or small-scale, other than natural gas: 0.00049136 MJ
- heat, district or industrial, natural gas: 0.013486 MJ
- heat, district or industrial, other than natural gas: 0.00316649 MJ
- hydrochloric acid, without water, in 30% solution state: 1.51612e-9, 6.78896e-9 kg (2 suppliers, which the file names only by identifier); sum of these 8.30507e-9 kg
- inert waste: -7.28131e-6, -6.27117e-8, -2.56657e-5 kg (3 suppliers, which the file names only by identifier); sum of these -3.30097e-5 kg
- inert waste, for final disposal: -1.47234e-7 kg
- injection moulding: 7.77474e-5, 0.000503142 kg (2 suppliers, which the file names only by identifier); sum of these 0.000580889 kg
- iron-nickel-chromium alloy: 8.28675e-7 kg
- kraft paper: 0.000187735, 2.34419e-5 kg (2 suppliers, which the file names only by identifier); sum of these 0.000211177 kg
- lead: 2.39854e-5 kg
- light fuel oil: 1.73891e-6 kg
- lime, hydrated, packed: 1.35074e-8, 1.14655e-10 kg (2 suppliers, which the file names only by identifier); sum of these 1.36221e-8 kg
- lubricating oil: 2.254e-6, 4.74813e-7 kg (2 suppliers, which the file names only by identifier); sum of these 2.72881e-6 kg
- maintenance, refrigeration machine: 1.27418e-8 unit
- metal working factory: 5.6177e-12 unit
- metal working, average for aluminium product manufacturing: 3.88448e-5 kg
- metal working, average for chromium steel product manufacturing: 1.14835e-6 kg
- metal working, average for steel product manufacturing: 5.17251e-5, 0.000311199 kg (2 suppliers, which the file names only by identifier); sum of these 0.000362924 kg
- nickel smelter slag: -2.26686e-5 kg
- nickel, class 1: 2.26733e-5 kg
- nitric acid, without water, in 50% solution state: 9.36412e-11, 1.2182e-9, 1.39136e-10, 3.46006e-10, 4.4997e-10, 1.65788e-10, 5.70204e-10, 1.50324e-10, 1.38621e-10, 1.05641e-9 kg (10 suppliers, which the file names only by identifier); sum of these 4.32831e-9 kg
- nylon 6: 1.10823e-5, 5.47308e-6 kg (2 suppliers, which the file names only by identifier); sum of these 1.65554e-5 kg
- nylon 6-6: 1.47234e-7 kg
- oxygen, liquid: 3.60241e-7, 1.31289e-6 kg (2 suppliers, which the file names only by identifier); sum of these 1.67313e-6 kg
- packaging box factory: 3.61707e-13 unit
- palladium: 4.66481e-11 kg
- paper, woodcontaining, lightweight coated: 6.86246e-7 kg
- phenol: 5.44182e-7, 1.69835e-6 kg (2 suppliers, which the file names only by identifier); sum of these 2.24254e-6 kg
- pig iron: 6.07177e-6, 6.5554e-5 kg (2 suppliers, which the file names only by identifier); sum of these 7.16258e-5 kg
- pitch: 4.38481e-10, 2.32689e-9, 6.669e-8, 3.32185e-9, 2.93461e-7, 1.14697e-9, 5.19115e-8, 2.01251e-8 kg (8 suppliers, which the file names only by identifier); sum of these 4.39422e-7 kg
- plastic processing factory: 9.2287e-13 unit
- polycarbonate: 2.5579e-6 kg
- polyethylene, high density, granulate: 0.00020804 kg
- polyethylene, low density, granulate: 0.0018603 kg
- polyol: 2.82728e-8, 5.72488e-8 kg (2 suppliers, which the file names only by identifier); sum of these 8.55216e-8 kg
- polypropylene, granulate: 0.0022695 kg
- polystyrene, general purpose: 0.00025979 kg
- polyurethane, rigid foam: 2.01033e-5, 4.07067e-5 kg (2 suppliers, which the file names only by identifier); sum of these 6.081e-5 kg
- polyvinylchloride, bulk polymerised: 0.000231229 kg
- polyvinylchloride, suspension polymerised: 1.2595e-6 kg
- polyvinylidenchloride, granulate: 8.05268e-6, 1.63057e-5 kg (2 suppliers, which the file names only by identifier); sum of these 2.43583e-5 kg
- powder coat, steel: 2.30474e-5 m2
- printed paper: 2.43666e-5 kg
- propylene glycol, liquid: 6.47135e-7, 3.19593e-7 kg (2 suppliers, which the file names only by identifier); sum of these 9.66728e-7 kg
- refrigerant R134a: 3.88145e-8 kg
- refrigeration machine, R134a as refrigerant: 1.31826e-7 unit
- refrigeration machine, carbon dioxide, liquid as refrigerant: 1.46474e-8 unit
- reinforcing steel: 9.93093e-5 kg
- road vehicle factory: 1.60082e-13 unit
- scrap aluminium: -0.000318198, -1.49291e-5, -0.000669994 kg (3 suppliers, which the file names only by identifier); sum of these -0.00100312 kg
- scrap copper: -5.61872e-6, -0.000110491, -0.000232648 kg (3 suppliers, which the file names only by identifier); sum of these -0.000348758 kg
- scrap lead acid battery: -1.82103e-5 kg
- scrap steel: -6.7295e-6, -0.00662716, -0.00213395 kg (3 suppliers, which the file names only by identifier); sum of these -0.00876784 kg
- seal, natural rubber based: 1.62444e-6 kg
- section bar rolling, steel: 7.16258e-5 kg
- sheet rolling, steel: 1.83678e-5 kg
- silicone product: 2.66972e-6, 5.4335e-6 kg (2 suppliers, which the file names only by identifier); sum of these 8.10321e-6 kg
- silver: 4.66481e-10 kg
- sodium hydroxide, without water, in 50% solution state: 1.6742e-8 kg
- spent anion exchange resin from potable water production: -3.34964e-6 kg
- spent cation exchange resin from potable water production: -7.39532e-6 kg
- spent solvent mixture: -6.35466e-8, -5.81726e-10 kg (2 suppliers, which the file names only by identifier); sum of these -6.41284e-8 kg
- steam, in chemical industry: 3.33568e-5, 0.000189191 kg (2 suppliers, which the file names only by identifier); sum of these 0.000222548 kg
- steel, chromium steel 18/8: 2.94137e-10 kg
- steel, chromium steel 18/8, hot rolled: 0.000218148 kg
- steel, low-alloyed: 0.002702 kg
- steel, low-alloyed, hot rolled: 0.00636048 kg
- steel, unalloyed: 4.81304e-5 kg
- stone wool, packed: 4.39422e-7 kg
- sulfuric acid: 1.08416e-6, 1.4183e-7 kg (2 suppliers, which the file names only by identifier); sum of these 1.22599e-6 kg
- synthetic rubber: 0.000309818 kg
- tap water: 4.78537e-8, 0.010656, 1.99424e-6, 7.90862e-8, 1.04443e-7, 1.47571e-7, 2.28211e-5, 5.18797e-8, 3.97545e-7 kg (9 suppliers, which the file names only by identifier); sum of these 0.0106817 kg
- tetrafluoroethylene: 5.02619e-10 kg
- textile, jute: 1.53063e-7 kg
- tin: 1.39944e-8 kg
- tin plated chromium steel sheet, 2 mm: 4.17304e-6 m2
- trisodium phosphate: 8.45359e-5 kg
- used cable: -0.00010234 kg
- used lorry with refrigeration machine, 16 metric ton: -4.39422e-8 unit
- used reefer, intermodal shipping container, 40-foot, high-cube: -1.02531e-7 unit
- used refrigeration machine, R134a as refrigerant: -8.62544e-9 unit
- used refrigeration machine, carbon dioxide, liquid as refrigerant: -4.11633e-9 unit
- vinyl acetate: 6.65721e-5 kg
- waste aluminium: -4.56391e-5 kg
- waste bulk iron, excluding reinforcement: -0.000278105, -0.000133739, -5.5221e-5 kg (3 suppliers, which the file names only by identifier); sum of these -0.000467065 kg
- waste concrete: -0.00019476 kg
- waste electric and electronic equipment: -1.0944e-5 kg
- waste glass: -9.45993e-7, -2.26598e-6, -2.45854e-5, -2.11413e-7, -4.67006e-5, -3.21042e-7, -0.000231696, -5.14074e-8, -1.48428e-6 kg (9 suppliers, which the file names only by identifier); sum of these -0.000308262 kg
- waste glass sheet: -3.68462e-6, -9.38104e-8, -1.41982e-5 kg (3 suppliers, which the file names only by identifier); sum of these -1.79766e-5 kg
- waste mineral oil: -1.73891e-6 kg
- waste packaging paper: -0.000133308, -5.44146e-6, -8.34305e-6, -2.59963e-14, -3.01469e-5, -5.46352e-5, -7.29524e-7, -2.93958e-6 kg (8 suppliers, which the file names only by identifier); sum of these -0.000235544 kg
- waste paperboard: -9.51875e-7, -6.20827e-7, -0.000115796, -6.23344e-6, -1.53085e-5, -3.35382e-7, -3.43953e-6, -8.32328e-8 kg (8 suppliers, which the file names only by identifier); sum of these -0.000142769 kg
- waste paperboard, unsorted: -3.7989e-5 kg
- waste plastic, industrial electronics: -2.26945e-7, -1.50221e-5 kg (2 suppliers, which the file names only by identifier); sum of these -1.5249e-5 kg
- waste plastic, mixture: -0.000385159, -1.14092e-7, -2.28398e-8, -1.94628e-6, -3.06105e-9, -1.11846e-8, -2.04554e-8, -1.24344e-8, -1.42218e-8, -8.41338e-9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 kg (43 suppliers, which the file names only by identifier); sum of these -0.00346786 kg
- waste polyethylene: -1.79938e-5, -3.60175e-12, -2.5862e-13, -2.87291e-14, -1.87843e-13, -7.29653e-13, -1.38084e-13, -7.21024e-13, -2.58263e-12, -8.16591e-12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 kg (43 suppliers, which the file names only by identifier); sum of these -0.00214136 kg
- waste polypropylene: -2.15416e-6, -5.31026e-11, -1.41345e-10, -4.04476e-9, -3.88324e-11, -5.91383e-10, -1.91675e-9, -5.74341e-10, -7.13961e-10, -0.00016743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 kg (43 suppliers, which the file names only by identifier); sum of these -0.00225529 kg
- waste polystyrene: -7.61573e-7, -0.00020344, -3.23998e-7, -2.90606e-5, -8.01999e-7, -1.46849e-7, -1.94172e-6, -2.51863e-5 kg (8 suppliers, which the file names only by identifier); sum of these -0.000261663 kg
- waste polyurethane foam: -6.0575e-6, -4.75141e-9 kg (2 suppliers, which the file names only by identifier); sum of these -6.06225e-6 kg
- waste polyvinylchloride: -1.58566e-7, -8.22338e-7, -3.4985e-7, -8.65989e-7, -1.43357e-6, -2.09664e-6, -3.13793e-5, -2.71959e-5, -0.000219673 kg (9 suppliers, which the file names only by identifier); sum of these -0.000283975 kg
- waste rubber, unspecified: -6.05158e-6, -0.000144154, -0.000144154 kg (3 suppliers, which the file names only by identifier); sum of these -0.00029436 kg
- waste textile, soiled: -1.50806e-7, -2.25718e-9 kg (2 suppliers, which the file names only by identifier); sum of these -1.53063e-7 kg
- waste, from silicon wafer production: -8.10321e-6 kg
- wastewater from lorry production: -4.1647e-9, -8.6121e-7 m3 (2 suppliers, which the file names only by identifier); sum of these -8.65375e-7 m3
- wastewater, average: -5.11956e-8, -2.17386e-8, -3.03315e-8, -8.51917e-6, -2.03711e-6 m3 (5 suppliers, which the file names only by identifier); sum of these -1.06595e-5 m3
- water pump operation, diesel: 0.0136307 MJ
- water pump operation, electric: 0.0238537 MJ
- water, completely softened: 8.81768e-7, 1.22679e-6, 1.63888e-6 kg (3 suppliers, which the file names only by identifier); sum of these 3.74744e-6 kg
- welding, arc, steel: 7.29641e-6 m
- wire drawing, copper: 5.99263e-6 kg
- wire drawing, steel: 0.000186751, 0.000185016 kg (2 suppliers, which the file names only by identifier); sum of these 0.000371767 kg
- zinc: 1.12564e-6 kg
- zinc coat, coils: 8.31731e-6 m2
- zinc coat, pieces: 4.45811e-5 m2

## Inputs from nature
- Occupation, industrial area [natural resource, land]: 3.30475e-6 m2*year
- Transformation, from arable land, unspecified use [natural resource, land]: 3.83491e-8 m2
- Transformation, from forest, unspecified [natural resource, land]: 3.05861e-8 m2
- Transformation, from unspecified [natural resource, land]: 3.62516e-8 m2
- Transformation, to industrial area [natural resource, land]: 1.05187e-7 m2
- Water, river [natural resource, in water]: 0.0384475 m3
- Water, well, in ground [natural resource, in water]: 0.0108472 m3

## Emissions to nature
- Ammonia [air, unspecified]: 9.79911e-10 kg
- Benzene [air, unspecified]: 5.75643e-10 kg
- Cadmium II [air, unspecified]: 7.602e-14 kg
- Carbon dioxide, fossil [air, non-urban air or from high stacks]: 2.35954e-6 kg
- Carbon dioxide, fossil [air, unspecified]: 2.78154e-5 kg
- Carbon monoxide, fossil [air, unspecified]: 4.27557e-8 kg
- Chromium III [air, unspecified]: 1.28751e-11 kg
- Copper ion [air, unspecified]: 1.28751e-11 kg
- Dinitrogen monoxide [air, unspecified]: 9.79911e-10 kg
- Lead II [air, unspecified]: 8.34902e-16 kg
- Mercury II [air, unspecified]: 1.51601e-16 kg
- Methane, fossil [air, unspecified]: 7.25046e-10 kg
- NMVOC, non-methane volatile organic compounds [air, unspecified]: 3.82048e-7 kg
- Nickel II [air, unspecified]: 5.317e-13 kg
- Nitrogen oxides [air, unspecified]: 2.63653e-7 kg
- Particulate Matter, < 2.5 um [air, unspecified]: 1.11613e-8 kg
- Particulate Matter, > 10 um [air, unspecified]: 4.7897e-10 kg
- Particulate Matter, > 2.5 um and < 10um [air, unspecified]: 9.31574e-10 kg
- Selenium IV [air, unspecified]: 7.602e-14 kg
- Sulfur dioxide [air, unspecified]: 5.27306e-9 kg
- Toluene [air, unspecified]: 2.42121e-10 kg
- Water [air, unspecified]: 5.70031e-7 m3
- Xylene [air, unspecified]: 2.42121e-10 kg
- Zinc II [air, unspecified]: 7.602e-12 kg
- BOD5, Biological Oxygen Demand [water, unspecified]: 5.53672e-9 kg
- COD, Chemical Oxygen Demand [water, unspecified]: 5.53672e-9 kg
- DOC, Dissolved Organic Carbon [water, unspecified]: 2.42121e-9 kg
- TOC, Total Organic Carbon [water, unspecified]: 2.42121e-9 kg
- Water [water, unspecified]: 2.41396e-6 m3
