# wood preservative production, creosote

Dataset: EcoSpold 2, unit process
Geography: RER
Time period: 2011-01-01 to 2022-12-31
Technology level: current
Classification: ISIC rev.4 ecoinvent: 2021:Manufacture of pesticides and other agrochemical products
Synonyms: carbolineum; tar-oil; creosote oil
Tags: Swiss brush-up completed
Scenario: Business-as-Usual
System model: Allocation at the point of substitution
Generated by: Frank Werner
Published in: Werner F. 2009
Database: ecoinvent
isCopyrightProtected: true

## General comment
This dataset represents the production of one kg of tar-oil creosote WEI type C ( Grade C according to EN 13991 ) to be used as wood preservative. Creosote WEI type C has been optimized with regard to low-volatile and highly volatile components and contains comparably low levels of benzo[a] pyrene. Due to the reduction in highly volatile compoments, odour impacts are reduced as compared to other types of creosote.
In the process of coal-tar distillation, the distillate is collected into four fractions; the 'light oil', which remains lighter than water, the 'middle oil' which passes over when the light oil is removed; the 'heavy oil', which sinks; and the 'anthracene oil', which when cold is mostly solid and greasy, of a buttery consistence. Creosote refers to the portion of coal tar which distills as 'heavy oil', typically between 230–270°C, also called 'dead oil'; it sinks into water but still is fairly liquid.

## Included activities start
From reception of coal tar resulting from the coking process of hard coal at the factory gate.

## Included activities end
This acitivity ends with the creosote WEI type C at the factory gate. The dataset includes the material inputs to production, transports of those materials and available process emissions. The dataset also includes a very rough estimate of plant infrastructure

## Geography
Data for Germany used for Europe

## Technology
Destillation of the coal tar to creosote

## Reference product
- wood preservative, creosote: 1 kg; By-product classification allocatable product; CPC 345: Miscellaneous basic chemical products; CAS 8001-58-9
  production volume 1.35136e7 kg
    Estimated from German production (5000-6000 t according to OECD 2000), extrapolated to RER via GDP, assuming 50% creosote WEI type C
  property heating value, net 28.51 MJ
    LHV is calculated based on the Carbon content of the product. More details can be found on the respective documentation.
  property price 0.435851 EUR2005
    Calculated based on inputs: The price of the product has been calculated as a sum of the values of the material and energy inputs for this product. This value is therefore a rough estimation. It may underestimate the real price since there are additional expenses when producing any product. These expences can include for example labour costs, treatment of waste materials and profit for the producer. Please consider carefully whether this level of data quality is acceptable for your application.
  properties: carbon allocation 0.940828 kg, carbon content 0.940828, carbon content, fossil 0.940828, carbon content, non-fossil 0, dry mass 1 kg, water content 0, water in wet mass 0 kg, wet mass 1 kg

## Inputs from technosphere
- coal gas: -0.0656185, -8.89928 MJ (2 suppliers, which the file names only by identifier); sum of these -8.9649 MJ
- coal tar: -0.065497 kg
- electricity, medium voltage: 0.00019458, 0.000547636, 5.23497e-5, 1.45835e-5, 0.000177931, 0.0191287, 2.47065e-5, 0.000940582, 0.00596876, 0.00117922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 kWh (47 suppliers, which the file names only by identifier); sum of these 0.100082 kWh
- hard coal: 0.29299, 0.388764, 0.176279, 0.0206743, 1.24757, 0.179889, 0.137249, 0.262812, 0.0764996, 0.0418298 kg (10 suppliers, which the file names only by identifier); sum of these 2.82456 kg
- hard coal coke factory: 3.45406e-11, 2.54684e-13 unit (2 suppliers, which the file names only by identifier); sum of these 3.47953e-11 unit
- iron sulfate: 0.000148321, 1.09364e-6 kg (2 suppliers, which the file names only by identifier); sum of these 0.000149415 kg
- phosphoric acid, fertiliser grade, without water, in 70% solution state: 2.18728e-6, 0.000296643 kg (2 suppliers, which the file names only by identifier); sum of these 0.00029883 kg
- sodium hydroxide, without water, in 50% solution state: 0.00417543 kg
- water, decarbonised: 1.11198, 0.148174, 0.02942, 9.26648e-5, 0.0239702, 0.00727441, 0.0967385, 0.94392, 0.597621, 0.177272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 kg (13 suppliers, which the file names only by identifier); sum of these 3.27485 kg

## Emissions to nature
- Acetone [air, non-urban air or from high stacks]: 8.59451e-5 kg
- Acrolein [air, non-urban air or from high stacks]: 1.0606e-7 kg
- Aluminium III [air, non-urban air or from high stacks]: 3.0562e-7 kg
- Ammonia [air, non-urban air or from high stacks]: 1.25643e-5 kg
- Antimony ion [air, non-urban air or from high stacks]: 1.48049e-9 kg
- Arsenic ion [air, non-urban air or from high stacks]: 4.02512e-8 kg
- Barium II [air, non-urban air or from high stacks]: 4.91228e-8 kg
- Benzene [air, non-urban air or from high stacks]: 0.00219448 kg
- Benzo(a)pyrene [air, non-urban air or from high stacks]: 1.58693e-5 kg
- Beryllium II [air, non-urban air or from high stacks]: 7.69266e-10 kg
- Boron [air, non-urban air or from high stacks]: 9.84277e-10 kg
- Bromine [air, non-urban air or from high stacks]: 1.96256e-10 kg
- Cadmium II [air, non-urban air or from high stacks]: 6.90936e-10 kg
- Calcium [air, non-urban air or from high stacks]: 3.61051e-8 kg
- Carbon dioxide, fossil [air, non-urban air or from high stacks]: 0.32639 kg
- Carbon disulfide [air, non-urban air or from high stacks]: 1.8977e-6 kg
- Carbon monoxide, fossil [air, non-urban air or from high stacks]: 0.0345559 kg
- Chromium III [air, non-urban air or from high stacks]: 1.96428e-8 kg
- Cobalt II [air, non-urban air or from high stacks]: 5.61398e-9 kg
- Copper ion [air, non-urban air or from high stacks]: 2.42434e-8 kg
- Cyanide [air, non-urban air or from high stacks]: 6.6643e-6 kg
- Ethane [air, non-urban air or from high stacks]: 0.000581367 kg
- Ethanol [air, non-urban air or from high stacks]: 8.67578e-8 kg
- Ethylene [air, non-urban air or from high stacks]: 8.41954e-7 kg
- Ethyne [air, non-urban air or from high stacks]: 2.72661e-8 kg
- Hydrocarbons, aliphatic, unsaturated [air, non-urban air or from high stacks]: 2.72661e-8 kg
- Hydrogen sulfide [air, non-urban air or from high stacks]: 7.65549e-7 kg
- Iodine [air, non-urban air or from high stacks]: 3.61051e-11 kg
- Iron ion [air, non-urban air or from high stacks]: 1.25844e-7 kg
- Lead II [air, non-urban air or from high stacks]: 6.30407e-8 kg
- Magnesium [air, non-urban air or from high stacks]: 1.09364e-7 kg
- Manganese II [air, non-urban air or from high stacks]: 3.47831e-8 kg
- Mercury II [air, non-urban air or from high stacks]: 7.49425e-10 kg
- Methane, chlorodifluoro-, HCFC-22 [air, non-urban air or from high stacks]: 6.64398e-6 kg
- Methane, fossil [air, non-urban air or from high stacks]: 0.00534417 kg
- Methanol [air, non-urban air or from high stacks]: 8.67578e-6 kg
- Molybdenum VI [air, non-urban air or from high stacks]: 5.36334e-11 kg
- NMVOC, non-methane volatile organic compounds [air, non-urban air or from high stacks]: 0.0213354 kg
- Nickel II [air, non-urban air or from high stacks]: 4.38415e-8 kg
- Nitrogen oxides [air, non-urban air or from high stacks]: 0.00173409 kg
- PAH, polycyclic aromatic hydrocarbons [air, non-urban air or from high stacks]: 4.65282e-6 kg
- Particulate Matter, < 2.5 um [air, non-urban air or from high stacks]: 0.00502626 kg
- Particulate Matter, > 10 um [air, non-urban air or from high stacks]: 0.00846508 kg
- Particulate Matter, > 2.5 um and < 10um [air, non-urban air or from high stacks]: 0.00229956 kg
- Phenol, pentachloro- [air, non-urban air or from high stacks]: 6.98939e-6 kg
- Phosphorus [air, non-urban air or from high stacks]: 9.52605e-8 kg
- Potassium I [air, non-urban air or from high stacks]: 3.61051e-8 kg
- Propane [air, non-urban air or from high stacks]: 5.94758e-6 kg
- Propene [air, non-urban air or from high stacks]: 5.46821e-8 kg
- Scandium [air, non-urban air or from high stacks]: 7.10118e-11 kg
- Selenium IV [air, non-urban air or from high stacks]: 1.33669e-8 kg
- Silicon [air, non-urban air or from high stacks]: 4.47943e-7 kg
- Silver I [air, non-urban air or from high stacks]: 2.64134e-10 kg
- Sodium [air, non-urban air or from high stacks]: 1.79777e-8 kg
- Strontium [air, non-urban air or from high stacks]: 3.61051e-9 kg
- Styrene [air, non-urban air or from high stacks]: 8.89928e-8 kg
- Sulfur dioxide [air, non-urban air or from high stacks]: 0.00329809 kg
- Thallium I [air, non-urban air or from high stacks]: 3.10631e-9 kg
- Thorium [air, non-urban air or from high stacks]: 7.10118e-11 kg
- Tin ion [air, non-urban air or from high stacks]: 3.61051e-11 kg
- Titanium ion [air, non-urban air or from high stacks]: 1.09364e-8 kg
- Toluene [air, non-urban air or from high stacks]: 6.91506e-6 kg
- Uranium [air, non-urban air or from high stacks]: 3.61051e-11 kg
- Vanadium V [air, non-urban air or from high stacks]: 7.10118e-10 kg
- Water [air, unspecified]: 0.001269 m3
- Zinc II [air, non-urban air or from high stacks]: 1.23189e-7 kg
- Zirconium [air, non-urban air or from high stacks]: 8.74913e-10 kg
- Ammonium [water, surface water]: 3.72514e-5 kg
- Chloride [water, surface water]: 0.00290643 kg
- Hydrogen sulfide [water, surface water]: 5.9766e-6 kg
- PAH, polycyclic aromatic hydrocarbons [water, surface water]: 4.48245e-8 kg
- Sodium I [water, surface water]: 0.0018687 kg
- Solids, inorganic [water, surface water]: 0.00164356 kg
- Water [water, unspecified]: 0.00200584 m3

## Sampling procedure
Literature
