# treatment of sewage sludge, 75% water, WWT, WW from ceramic production, sanitary landfill

Dataset: EcoSpold 2, unit process
Geography: GLO
Time period: 1994-01-01 to 2022-12-31
Technology level: current
Classification: ISIC rev.4 ecoinvent: 3821:Treatment and disposal of non-hazardous waste
Scenario: Business-as-Usual
System model: Allocation at the point of substitution
Generated by: Nikolia Stoikou
Database: ecoinvent
isCopyrightProtected: true

## General comment
The process represents the treatment of a waste (sewage sludge) that is exclusively generated from another waste treatment. Sewage sludge is generated in the wastewater treatment of 'wastewater from ceramic production'. Recommended use of this dataset: to be used within the specific chain of treatments for 'wastewater from ceramic production'. Share of biogenic carbon in the sludge: 0%. Landfill gas capture and utilisation generates 0.03321 kWh of electricity and 0.0599 MJ of useful heat. 0.002598 kg waste mass remains in the landfill even after the long term period.

## Included activities start
The activity starts with the waste being available at the gate of the treatment facility. Collection and transportation of the waste to the treatment plant is not included.

## Included activities end
The activity ends with the waste being treated and waste-specific emissions from the landfill are released to the environment (air due to landfil gas and water due to landfil leachate).

## Geography
Landfill site with mean annual temperature (MAT) of 16.743579766537 degC, mean annual precipitation (MAP) of 1250.84108527132 mm/year, and net infiltration of 790.252035689178 mm/year.The leachate percolating through the landfill has an average residence time of 6.33 years.
References: UN data, 2020. Precipitation, Environment Statistics Database, United Nations Statistics Division Available at: http://data.un.org/Data.aspx?q=precipitation&d=ENV&f=variableID%3a6;
World Bank, 2022. Surface area (sq.km), World Bank Group Available at: https://data.worldbank.org/indicator/AG.SRF.TOTL.K2;
Doka G.,2021. A model for composition-specific life cycle inventories of regionalised wastewater fates, Zurich, Switzerland. http://www.doka.ch/publications.htm

## Technology
Sanitary (controlled) landfill for municipal solid waste. Ultimate average landfill height is 20 meters. Operation phase duration is 30 years. The total raw landfill gas mass produced in the landfill from this waste is 0.01948 kg. The total CH4 mass in the raw landfill gas is 0.0008547 kg. Percentage of landfill gas directly emitted is 47w%. Percentage of landfill gas captured and flared is 18.02w%. Percentage of landfill gas captured and utilised is 34.98%. Conversion efficiencies are 27.8e% for electricity and 13.5e% for useful heat. Leachate generated during the first 100 years is collected and treated region-specifically before emission. Based on average waste composition and climate data the end of carbonate phase is estimated to be reached 2'863 years after waste deposition.

## Reference product
- heat, district or industrial, other than natural gas: 1 MJ; By-product classification allocatable product; CPC 17300: Steam and hot water; lognormal variance with pedigree 0.58158, pedigree (1,1,1,1,1)
  Net production of heat from landfill gas utilisation.
  Uncertainty: Uncertainty calculated depending on waste input and uncertainty of transfer coefficients in landfill to landfill gas, uncertainty in gas capture and utilisation.
  production volume 3.83268e-8 MJ
    Calculated from the production volume of the reference product in proportion to the respective output amounts.
  property corresponding fuel use, propane, furnace >100kW 0 MJ; name fuel_use
    Lower heating value of the fuel input related to the heat/electricity output, taken directly from ecoinvent v3.0 dataset "heat production, natural gas, at industrial furnace >100kW, GLO 2000".
  property price 0.0106 EUR2005
    Average European district heat price from Ecoheatcool and Euroheat 2005-2006, Ecoheat Work package 1: The European heat market. Final report. 10.6 EUR/GJ i s the price of district heat. http://www.solarthermalworld.org/files/Ecoheatcool%20WP1%20Web.pdf?download
  properties: carbon allocation 0 kg, carbon content 0, carbon content, fossil 0, carbon content, non-fossil 0, dry mass 1 kg, heating value, net 1 MJ, water content 0, water in wet mass 0 kg, wet mass 1 kg

## Inputs from technosphere
- ammonia, anhydrous, liquid: 2.17177e-6, 2.27625e-7, 2.21669e-6, 8.36563e-6, 1.11878e-6, 1.01757e-6, 2.40727e-5, 7.19126e-7 kg (8 suppliers, which the file names only by identifier); sum of these 3.99099e-5 kg
- bilge oil: -5.84402e-9, -1.21523e-8 kg (2 suppliers, which the file names only by identifier); sum of these -1.79964e-8 kg
- ceramic factory: 4.06698e-13 unit
- chemical factory, organics: 2.83558e-13 unit
- chemical, inorganic: 3.08073e-7 kg
- clay: 4.32116e-5 kg
- electricity, medium voltage: 0.000227215, 7.08986e-5, 2.11136e-6, 1.0773e-5, 1.15143e-5, 0.0006505, 3.58693e-6, 3.55814e-5 kWh (8 suppliers, which the file names only by identifier); sum of these 0.00101218 kWh
- feldspar: 3.85346e-5 kg
- hazardous waste, for underground deposit: -1.03708e-8 kg
- heat, district or industrial, natural gas: 0.000620377, 0.00183739, 3.01931e-5 MJ (3 suppliers, which the file names only by identifier); sum of these 0.00248796 MJ
- hydrochloric acid, without water, in 30% solution state: 4.35537e-5 kg
- indium: 1.17656e-5 kg
- inert waste, for final disposal: -1.29126e-5 kg
- kaolin: 4.51434e-5 kg
- methanol: 2.41155e-6 kg
- municipal solid waste: -5.12028e-9, -2.95112e-7, -1.84375e-9, -3.62127e-6, -1.29018e-9 kg (5 suppliers, which the file names only by identifier); sum of these -3.92463e-6 kg
- polyethylene, high density, granulate: 1.53528e-7 kg
- silica sand: 2.55203e-5 kg
- sodium hydroxide, without water, in 50% solution state: 7.31181e-5 kg
- spent solvent mixture: -5.06641e-9, -1.97962e-9 kg (2 suppliers, which the file names only by identifier); sum of these -7.04604e-9 kg
- stucco: 1.27093e-5 kg
- tap water: 6.18697e-8, 2.57834e-6, 1.0225e-7, 1.90793e-7, 2.95052e-5, 6.70748e-8, 2.19863e-5, 5.13983e-7 kg (8 suppliers, which the file names only by identifier); sum of these 5.50058e-5 kg
- tin: 1.20146e-6 kg
- waste emulsion paint: -1.46807e-11, -1.38386e-12 kg (2 suppliers, which the file names only by identifier); sum of these -1.60646e-11 kg
- waste mineral oil: -2.08216e-8, -7.95221e-9 kg (2 suppliers, which the file names only by identifier); sum of these -2.87739e-8 kg
- waste plastic, mixture: -4.90873e-10, -2.48048e-12, -5.47278e-12, -3.43639e-9, -3.27983e-11, -4.18247e-10, -1.2864e-11, -1.35469e-11 kg (8 suppliers, which the file names only by identifier); sum of these -4.41267e-9 kg
- wastewater from ceramic production: -5.42114e-6 m3
- water, deionised: 0.0053212 kg

## Inputs from nature
- Water, well, in ground [natural resource, in water]: 1.07775e-6 m3

## Emissions to nature
- Ethanol [air, urban air close to ground]: 2.41155e-6 kg
- Particulate Matter, < 2.5 um [air, unspecified]: 8.85584e-7 kg
- Water [air, unspecified]: 1.69913e-7 m3
- Water [water, unspecified]: 8.62895e-7 m3
