# treatment of wastewater from cathode ray tube production, wastewater treatment

Dataset: EcoSpold 2, unit process
Geography: CH
Time period: 2010-01-01 to 2022-12-31
Technology level: current
Classification: ISIC rev.4 ecoinvent: 3700:Sewerage
Scenario: Business-as-Usual
System model: Allocation at the point of substitution
Generated by: Nikolia Stoikou
Database: ecoinvent
isCopyrightProtected: true

## General comment
This dataset represents the treatment of a wastewater, generated from an ordinary transforming activity. Purification in wastewater treatment of 'wastewater from cathode ray tube production'. Recommended use of this dataset: to be used for wastewaters, generated from ordinary transforming activities, of equal or similar composition. The wastewater has a content of TOC: 0.19978 kg/m3, COD: 0.77887 kg/m3 and BOD: 0.3767 kg/m3. TOC is equal to C present in the wastewater, COD is calculated as TOC/0.2565 and BOD is calculated as COD/0.53034. Detailed elemental composition can be found in the properties of the wastewater treated. Share of biogenic carbon in the sludge: 0%.

## Included activities start
The activity starts with the wastewater being available at the gate of the treatment facility. Collection and transportation of the wastewater to the treatment plant is not included.

## Included activities end
The activity ends with the wastewater being treated and waste-specific emissions released to the environment. Expenditures from treatment of wastewater in waste treatment plant are included as well as relevant infrastructure of the plant. Emissions from any sludge digestion, biogas generation and utilization (heeding specific wastewater composition) are also included. Waste-specific direct emissions of untreated wastewater and required territory-specific infrastructure for sewers are not contained within this dataset but instead in the regional market datasets for this wastewater.

## Geography
The site has mean annual temperature (MAT) of 9.5 degC, mean annual precipitation (MAP) of 1483.00559816076 mm/year, mean annual actual evaporation (EAT) of 528.63778611689 mm/year. In the WWT plant, 0% of its water input are lost due to evaporation from pools, 0.0107% of water is *gained* from organic mass degradation, and 0.0208% is removed off site via sludge disposal. (References: UN data, 2020. Precipitation, Environment Statistics Database, United Nations Statistics Division Available at: http://data.un.org/Data.aspx?q=precipitation&d=ENV&f=variableID%3a6; World Bank, 2022. Surface area (sq.km), World Bank Group Available at: https://data.worldbank.org/indicator/AG.SRF.TOTL.K2; MeteoSwiss, 2022. Data on Swiss temperature mean, Federal Department of Home Affairs FDHA. Federal Office of Meteorology and Climatology. Swiss Climate Available at: https://www.MeteoSwiss.admin.ch/home/climate/swiss-climate-in-detail/Swiss-temperature-mean/Data-on-the-Swiss-temperature-mean.html?query=TEMPERATURE+DATA&topic=/content/MeteoSwiss/tags/topics/klima&pageIndex=0&tab=search_tab; Doka G.,2021. A model for composition-specific life cycle inventories of regionalised wastewater fates, Zurich, Switzerland. http://www.doka.ch/publications.htm)

## Technology
This activity represents the treatment of a specific wastewater in a WWT plant (while direct emissions and sewering are heeded in the upstream market dataset for this wastewater). The size of the treatment plant infrastructure is for a national average territory situation. The assumed size of the WWTP treats 90.6 Mio m3 per year. The mixture of WWTP with one, two, or three stages is 0%-11.2%-88.8%. The actual, waste-specific oxygen requirement in the biological stages is 0.1625kg O. The generated waste-specific raw sludge mass (dry matter) is 0.2453kg DM. 89% of the raw sludge (DM) is treated with anaerobic digestion. The digestion process produces 156.6 litres of biogas with an energy content of 3.625MJ. 23.6% of the biogas is utilized for energy. The remainder is flared. The gross electric efficiency is 26.564%. The gross thermal efficiency is 47.853%. After digestion, the remaining total sludge mass (dry matter) is 0.1288kg DM.

## Reference product
- iron scrap, sorted, pressed: 1 kg; By-product classification Recyclable; CPC 39310: Slag, dross, scalings and other waste from the manufacture of iron or steel; lognormal variance with pedigree 0.3109, pedigree (1,1,1,1,1)
  scrap output from used infrastructure for wastewater treatment plant.
  Uncertainty: Uncertainty calculated from wastewater technosphere fate uncertainty and treatment infrastructure uncertainty.
  production volume 1.28633e-8 kg
    Calculated in proportion to wastewater reference product.
  property price 0.175 EUR2005
    Temporary price data. Calculated as 90% of purchasers price based on: 2005 import and export prices (total trades (USD) divided by total weight (kg) in biggest economies of the world: EU27, USA, Brasil, China, India, Japan and Russia) from UN Commodity Trade Statistics Database (http://data.un.org/Explorer.aspxDatabase [Accessed 2011.06.20]). Commodity: Waste or scrap, of cast iron
  properties: carbon allocation 0 kg, carbon content 0, carbon content, fossil 0, carbon content, non-fossil 0, dry mass 1 kg, water content 0, water in wet mass 0 kg, wet mass 1 kg

## Inputs from technosphere
- acetone, liquid: 1.02208e-7, 3.30473e-7 kg (2 suppliers, which the file names only by identifier); sum of these 4.32681e-7 kg
- acrylic dispersion, with water, in 58% solution state: 2.16836e-6, 1.02935e-5 kg (2 suppliers, which the file names only by identifier); sum of these 1.24618e-5 kg
- ammonia, anhydrous, liquid: 7.88838e-9, 8.26787e-10, 1.74579e-8, 8.05153e-9, 3.03859e-8, 4.06365e-9, 3.69604e-9, 8.74376e-8, 2.61203e-9 kg (9 suppliers, which the file names only by identifier); sum of these 1.6242e-7 kg
- ammonium carbonate: 4.36856e-6, 2.15745e-6 kg (2 suppliers, which the file names only by identifier); sum of these 6.526e-6 kg
- blast furnace sludge: -1.92808e-6, -1.12772e-6, -1.26952e-5, -2.86496e-7 kg (4 suppliers, which the file names only by identifier); sum of these -1.60375e-5 kg
- boric acid, anhydrous, powder: 6.45619e-6 kg
- calcium chloride: 3.88373e-5, 0.000134507 kg (2 suppliers, which the file names only by identifier); sum of these 0.000173344 kg
- carbon black: 2.81171e-5 kg
- chemical, inorganic: 2.83771e-5 kg
- chemical, organic: 0.000164333 kg
- chlorine, liquid: 4.58381e-5, 9.16934e-6 kg (2 suppliers, which the file names only by identifier); sum of these 5.50075e-5 kg
- electric arc furnace slag: -9.06785e-8, -3.85624e-6, -6.01015e-7 kg (3 suppliers, which the file names only by identifier); sum of these -4.54793e-6 kg
- electricity, medium voltage: 0.0120948 kWh
- electron gun, for cathode ray tube display: 0.000137859 kg
- frit, for cathode ray tube display: 9.10404e-5 kg
- funnel glass, for cathode ray tube display: 0.00366346 kg
- heat, district or industrial, natural gas: 0.0726267 MJ
- heat, district or industrial, other than natural gas: 0.213975 MJ
- hydrochloric acid, without water, in 30% solution state: 1.09387e-5, 4.89818e-5 kg (2 suppliers, which the file names only by identifier); sum of these 5.99205e-5 kg
- hydrogen peroxide, without water, in 50% solution state: 6.02056e-5, 1.26825e-5 kg (2 suppliers, which the file names only by identifier); sum of these 7.28881e-5 kg
- iron (III) chloride, without water, in 40% solution state: 0.000187 kg
- mischmetal: 7.83576e-6 kg
- nickel, class 1: 0.000133981 kg
- nitrogen, liquid: 4.89426e-5, 1.34344e-5 kg (2 suppliers, which the file names only by identifier); sum of these 6.2377e-5 kg
- oxygen, liquid: 2.22471e-6, 8.10788e-6 kg (2 suppliers, which the file names only by identifier); sum of these 1.03326e-5 kg
- panel glass, for cathode ray tube display: 0.00965829 kg
- printed wiring board mounting facility: 3.0378e-9 unit
- quicklime, milled, loose: 1.0792e-6, 0.000129136 kg (2 suppliers, which the file names only by identifier); sum of these 0.000130215 kg
- sheet rolling, steel: 0.00270524 kg
- sodium hydroxide, without water, in 50% solution state: 7.9193e-5 kg
- sodium hypochlorite, without water, in 15% solution state: 2.19687e-8, 1.04288e-7 kg (2 suppliers, which the file names only by identifier); sum of these 1.26257e-7 kg
- spent solvent mixture: -3.60569e-7, -3.30076e-9, -1.40887e-7 kg (3 suppliers, which the file names only by identifier); sum of these -5.04756e-7 kg
- steel, chromium steel 18/8, hot rolled: 0.00233399 kg
- steel, unalloyed: 0.000237605 kg
- sulfuric acid: 0.000148822, 1.9469e-5 kg (2 suppliers, which the file names only by identifier); sum of these 0.000168291 kg
- toluene, liquid: 5.78092e-6, 7.70789e-7 kg (2 suppliers, which the file names only by identifier); sum of these 6.55171e-6 kg
- waste frit from cathode ray tube production: -4.11753e-6 kg
- waste mineral oil: -2.36518e-8, -2.50156e-6, -9.55398e-7 kg (3 suppliers, which the file names only by identifier); sum of these -3.48061e-6 kg
- waste plastic, mixture: -4.56291e-6, -2.30573e-8, -5.08722e-8, -3.9546e-6, -3.19429e-5, -3.04876e-7, -1.19577e-7, -1.25925e-7 kg (8 suppliers, which the file names only by identifier); sum of these -4.10847e-5 kg
- waste wood, untreated: -3.71799e-9, -3.41141e-8, -5.08539e-8, -5.4337e-6, -2.15787e-8, -6.46369e-7, -1.42833e-7, -4.09567e-7 kg (8 suppliers, which the file names only by identifier); sum of these -6.74274e-6 kg
- waste, from silicon wafer production, inorganic: -3.90371e-7 kg
- wastewater from cathode ray tube production: -7.14502e-5, -3.45524e-7 m3 (2 suppliers, which the file names only by identifier); sum of these -7.17957e-5 m3
- xylene: 5.54976e-7, 1.00194e-7 kg (2 suppliers, which the file names only by identifier); sum of these 6.55171e-7 kg
- zinc sulfide: 1.39087e-5 kg

## Inputs from nature
- Water, unspecified natural origin [natural resource, in water]: 0.000809251 m3

## Emissions to nature
- Carbon monoxide, fossil [air, urban air close to ground]: 2.32041e-5 kg
- Dimethylamine [air, urban air close to ground]: 4.76364e-8 kg
- NMVOC, non-methane volatile organic compounds [air, urban air close to ground]: 2.17027e-7 kg
- Nitrogen oxides [air, urban air close to ground]: 2.96185e-6 kg
- Sulfur dioxide [air, urban air close to ground]: 1.35947e-5 kg
- Toluene [air, urban air close to ground]: 5.24137e-6 kg
- Water [air, unspecified]: 4.93643e-5 m3
- Xylene [air, urban air close to ground]: 5.24137e-7 kg
- BOD5, Biological Oxygen Demand [water, surface water]: 8.72198e-6 kg
- COD, Chemical Oxygen Demand [water, surface water]: 9.85487e-6 kg
- Chromium III [water, surface water]: 1.39223e-8 kg
- Copper ion [water, surface water]: 2.45682e-9 kg
- Cyanide [water, surface water]: 8.27157e-10 kg
- DOC, Dissolved Organic Carbon [water, surface water]: 3.64995e-6 kg
- Fluoride [water, surface water]: 4.70902e-6 kg
- Iron ion [water, surface water]: 2.2522e-7 kg
- Lead II [water, surface water]: 4.10847e-9 kg
- Manganese II [water, surface water]: 4.91378e-9 kg
- Molybdenum VI [water, surface water]: 1.63793e-10 kg
- Nickel II [water, surface water]: 1.08239e-7 kg
- Nitrogen [water, surface water]: 9.80025e-6 kg
- Oils, unspecified [water, surface water]: 3.28944e-7 kg
- Phosphate [water, surface water]: 1.10493e-9 kg
- Phosphorus [water, surface water]: 6.89288e-8 kg
- Suspended solids, unspecified [water, surface water]: 6.31964e-6 kg
- TOC, Total Organic Carbon [water, surface water]: 3.64995e-6 kg
- Water [water, unspecified]: 0.000688091 m3
- Zinc II [water, surface water]: 1.89731e-8 kg
