# fodder yeast to generic market for protein feed

Dataset: EcoSpold 2, unit process
Geography: GLO
Time period: 2012-01-01 to 2022-12-31
Technology level: current
Classification: ISIC rev.4 ecoinvent: 2011:Manufacture of basic chemicals
Scenario: Business-as-Usual
System model: Allocation at the point of substitution
Generated by: Tereza Levova
Database: ecoinvent
isCopyrightProtected: true

## General comment
This is a linking activity that converts fodder yeast into protein, 100% crude for the feed market and gross energy for the feed market.
The naming of the dataset is based on the feed nomenclature system of the National Research Council (USA). Products with less than 20 percent of protein are classified as energy feeds. Products with more than 20 percent of protein are classified as protein feeds.

## Included activities start
The activity starts with the reception of fodder yeast

## Included activities end
The activity ends with the conversion of fodder yeast into crude protein and gross energy.

## Reference product
- protein feed, 100% crude: 1 kg; name protein_feed; = 0.53* fodder_yeast_RP*(-1)*0.92; source Agroscope 2011; By-product classification allocatable product; CPC 23319: Preparations used in animal feeding n.e.c.
  Calculated based on crude protein content of fodder yeast (0.53 kg/kg dry mass). The dry mass of the reference product is 0.92kg/kg.
  production volume 2.96802e6 kg
    Calculated from production volume of reference product using the relative outputs.
  property carbon content, non-fossil 0.53
    considered pure protein (ecoinvent v2.2 report 17, pg 288). C-content in protein is estimated to be 53% ( from "Evolutionary and Biochemical Aspects", A.D. Kay and T. Vrede (in Global Ecology, 2010, Elsevier B.V., S.E. Jørgensen Ed.).
  property price 0.424 EUR2005
    Based on protein content and energy feed, gross content in soybean meal and prices per kg of soybean meal. Assumed soybean meal is the most used feed. Soybean meal 2004 prices for World import/export data (tonnes and US$) from FaoStat statistics (http://faostat.fao.org/site/535/default.aspx#ancor, TRADE)- [Accessed 24 May 2010]. See calculations for protein /energy content
  properties: carbon allocation 0.53 kg, carbon content 0.53, carbon content, fossil 0, dry mass 1 kg, water content 0, water in wet mass 0 kg, wet mass 1 kg

## Inputs from technosphere
- electricity, medium voltage: 0.0100382, 0.00313223, 9.32779e-5, 0.000475942, 0.00683856, 0.0287385, 0.00213034, 0.00157196, 0.000450064 kWh (9 suppliers, which the file names only by identifier); sum of these 0.0534691 kWh
- ethanol fermentation plant: 7.76691e-11, 6.59312e-13 unit (2 suppliers, which the file names only by identifier); sum of these 7.83285e-11 unit
- fodder yeast: -0.146716 kg
- heat, central or small-scale, other than natural gas: 0.483158, 0.00415773, 0.00663622 MJ (3 suppliers, which the file names only by identifier); sum of these 0.493952 MJ
- heat, district or industrial, natural gas: 0.239355, 0.648125, 0.0106504, 0.00762399 MJ (4 suppliers, which the file names only by identifier); sum of these 0.905755 MJ
- soda ash, light: 0.00586226 kg
- sodium phosphate: 0.000738873, 6.27209e-6 kg (2 suppliers, which the file names only by identifier); sum of these 0.000745145 kg
- sodium sulfate, anhydrite: 0.000282316, 2.39651e-6 kg (2 suppliers, which the file names only by identifier); sum of these 0.000284713 kg
- sulfuric acid: 0.00322116, 2.73436e-5 kg (2 suppliers, which the file names only by identifier); sum of these 0.00324851 kg
- tap water: 0.000959747, 0.0399962, 0.00158614, 0.00724319, 0.00295966, 0.457697, 0.00104049, 0.34106, 0.0079731 kg (9 suppliers, which the file names only by identifier); sum of these 0.860515 kg
- whey: 7.32042 kg

## Inputs from nature
- Water, cooling, unspecified natural origin [natural resource, in water]: 0.000184182 m3

## Emissions to nature
- Carbon dioxide, non-fossil [air, urban air close to ground]: 0.36848 kg
- Water [air, unspecified]: 0.000294261 m3
- BOD5, Biological Oxygen Demand [water, surface water]: 0.0057712 kg
- COD, Chemical Oxygen Demand [water, surface water]: 0.0057712 kg
- DOC, Dissolved Organic Carbon [water, surface water]: 0.00230849 kg
- TOC, Total Organic Carbon [water, surface water]: 0.00230849 kg
- Water [water, unspecified]: 0.000750404 m3

## Sampling procedure
inventory based on gross energy and protein composition of raw material. Data obtained from Agroscope database of feedstuff compositions.

## Review by Bo Weidema 2012-03-14
Production volumes are for 2005, even though the dataset is indicated to be valid for 2012.

## Review by Emilia Moreno Ruiz 2015-10-30
PV adjusted
