# treatment of waste textile, soiled, municipal incineration with fly ash extraction

Dataset: EcoSpold 2, unit process
Geography: CH
Time period: 2006-01-01 to 2022-12-31
Technology level: current
Classification: ISIC rev.4 ecoinvent: 3821:Treatment and disposal of non-hazardous waste
Synonyms: municipal waste incineration; Siedlungsabfallverbrennung; Kehrichtverbrennung
Scenario: Business-as-Usual
System model: Allocation at the point of substitution
Share of production covered: 100 %
Generated by: Gabor Doka
Published in: Doka G. 2015
Database: ecoinvent
isCopyrightProtected: true

## General comment
This dataset represents the activity of waste disposal of waste textile, soiled in a municipal solid waste incinerator (MSWI) // Recommended use of this dataset: For small or large amounts of soiled textiles, like used filters, absorbers, cleaning threads, and protective clothing from natural gas processing (textiles + 5% waste oil, 72.1% biogenic carbon content) // // Waste composition (wet, in ppm): upper heating value 19.78 MJ/kg; lower heating value 14.45 MJ/kg; H2O 229680; O 287940; H 49839; C 345150; S 14523; N 70864; P 37.5; B n.a.; Cl 1791.3; Br n.a.; F n.a.; I n.a.; Ag n.a.; As 0.06; Ba n.a.; Cd 0.04; Co n.a.; Cr 0.56; Cu 44.639; Hg 0.00006; Mn n.a.; Mo n.a.; Ni 0.16; Pb 25.603; Sb n.a.; Se n.a.; Sn n.a.; V n.a.; Zn 105.08; Be n.a.; Sc n.a.; Sr n.a.; Ti n.a.; Tl 0.03; W n.a.; Si n.a.; Fe n.a.; Ca n.a.; Al n.a.; K n.a.; Mg n.a.; Na n.a.; // Share of carbon in waste that is biogenic 72.1%. // Share of metals in waste not oxidised and bulk-recyclable (exclude very small or thin parts) Iron: 0%; Alu: 0%; Copper: 0%. // Recovery of metal scrap from bottom ash to recycling: 0g iron scrap, 0g aluminium scrap, 0g copper scrap. From this waste, the FLUWA process in the technology mix recovers 0.00237kg (DM) of a hydroxide sludge to be recycled in zinc furnaces. // Ultimately one kg of this waste produces 0.0417 kg of bottom ash (can include some washed ash) and 0.008532 kg of residues, which are landfilled (technology mix). Additional solidification of residues with 0.003413 kg of cement.Net energy production: 1.78MJ/kg electric energy and 3.58MJ/kg thermal energy. //

## Included activities start
waste incineration from waste reception gate and delivery into waste bunker at incinerator plant site (without transports to the incinerator)

## Included activities end
Waste-specific short-term emissions to water from leachate. Long-term emissions from landfill to ground water.

## Geography
Specific to the technology mix encountered in Switzerland in 2012.

## Technology
average Swiss MSWI plants in 2010 (grate incinerators) with electrostatic precipitator for fly ash (ESP), wet flue gas scrubber and 25% SNCR , 42.77% SCR-high dust , 32.68% SCR-low dust -DeNOx facilities and 0% without Denox (weighted according to mass of burnt waste, representing Swiss average). Efficiency of iron scrap separation from slag : 58%. Efficiency of non-ferrous scrap separation from slag : 31%. The technology mix for this dataset includes a filter ash treatment (FLUWA) of a share of 46.22%. Gross electric efficiency technology mix 15.84% and Gross thermal efficiency technology mix 28.51%

## Time period
Waste composition as given in literature reference, theoretical data or other source. Transfer coefficients for modern MSWI.

## Reference product
- heat, for reuse in municipal waste incineration only: 1 MJ; name E_th_prod_MSWI; By-product classification allocatable product; CPC 17300: Steam and hot water; lognormal variance with pedigree 0.096438, pedigree (1,1,1,1,1)
  Net useful heat generated from this waste and used in internal MSWI plant energy redistribution.
  Uncertainty: uncertainty is calculated from uncertainties in waste composition and uncertainties in energy efficiency and the uncertainty in internal energy demand
  production volume 1.6216e8 MJ
    calculated in proportion to reference product waste input to incinerator
  property exergy 0.1842 MJ; name E_th_prod_MSWI_exergy
    This exergy property is based on the exergy content of the product.
  property price 0.0106 EUR2005
    Average European district heat price from Ecoheatcool and Euroheat 2005-2006, Ecoheat Work package 1: The European heat market. Final report. 10.6 EUR/GJ i s the price of district heat. http://www.solarthermalworld.org/files/Ecoheatcool%20WP1%20Web.pdf?download
  property true value relation 0.1842; name E_th_prod_MSWI_true_value_relation
    property to calculate "true value" from
  properties: carbon allocation 0 kg, carbon content 0

## Inputs from technosphere
- EDTA, ethylenediaminetetraacetic acid: 3.4191e-6 kg
- acetic acid, without water, in 98% solution state: 3.36116e-8 kg
- acrylic dispersion, with water, in 58% solution state: 6.23323e-8 kg
- acrylic varnish, with water, in 53% solution state: 2.04806e-8 kg
- acrylonitrile-butadiene-styrene copolymer: 2.44087e-8 kg
- activated silica: 1.79472e-6 kg
- aluminium scrap, new: -1.11011e-8, -1.11011e-8 kg (2 suppliers, which the file names only by identifier); sum of these -2.22021e-8 kg
- aluminium scrap, post-consumer: -1.30769e-6 kg
- aluminium sulfate, powder: 2.48539e-8, 5.23556e-9 kg (2 suppliers, which the file names only by identifier); sum of these 3.00894e-8 kg
- aluminium, cast alloy: 8.08384e-8 kg
- aluminium, wrought alloy: 2.08386e-6 kg
- ammonia, anhydrous, liquid: 6.40781e-7, 6.71608e-8, 1.41813e-6, 2.46828e-6, 3.30095e-7, 3.00234e-7, 7.10265e-6, 2.12178e-7 kg (8 suppliers, which the file names only by identifier); sum of these 1.25395e-5 kg
- ammonium chloride: 4.82899e-7 kg
- anode, for metal electrolysis: 3.31486e-8 kg
- antimony: 2.28077e-9 kg
- ash from paper production sludge: -4.30663e-8, -1.64756e-6 kg (2 suppliers, which the file names only by identifier); sum of these -1.69063e-6 kg
- barium carbonate: 5.87279e-8 kg
- blast furnace sludge: -1.00141e-7, -5.85718e-8, -6.59366e-7, -1.48801e-8 kg (4 suppliers, which the file names only by identifier); sum of these -8.32959e-7 kg
- brass: 2.34102e-10, 1.17639e-12 kg (2 suppliers, which the file names only by identifier); sum of these 2.35278e-10 kg
- building, hall: 2.97307e-9 m2
- building, hall, steel construction: 2.08344e-10 m2
- butane: 1.83595e-8 kg
- calcium chloride: 4.9153e-8, 1.70234e-7 kg (2 suppliers, which the file names only by identifier); sum of these 2.19387e-7 kg
- cement, unspecified: 2.05529e-6, 7.71133e-9, 5.04395e-9, 2.89891e-9, 2.0409e-7, 5.37396e-8, 6.40615e-9, 3.2749e-8, 1.23647e-7 kg (9 suppliers, which the file names only by identifier); sum of these 2.49158e-6 kg
- chemical, inorganic: 2.13717e-6 kg
- chemical, organic: 1.46183e-8 kg
- chimney: 1.24789e-11 m
- chlorine dioxide: 9.2007e-7 kg
- chlorine, liquid: 1.05971e-9, 2.11981e-10 kg (2 suppliers, which the file names only by identifier); sum of these 1.27169e-9 kg
- chromium: 4.04972e-10 kg
- clinker: 1.61685e-7, 3.75035e-8, 2.30168e-6, 7.17387e-7, 7.67604e-7, 1.17047e-8, 4.80781e-8, 2.87746e-8 kg (8 suppliers, which the file names only by identifier); sum of these 4.07441e-6 kg
- coke: 0.000341859 MJ
- compressed air, 800 kPa gauge: 9.73867e-12, 3.96286e-12 m3 (2 suppliers, which the file names only by identifier); sum of these 1.37015e-11 m3
- copper cake: -5.27795e-6 kg
- copper scrap, sorted, pressed: -7.99615e-7 kg
- copper sulfate: 5.02156e-8 kg
- copper, cathode: 8.89046e-7 kg
- corrugated board box: 1.37565e-6, 3.19303e-6, 5.12431e-8 kg (3 suppliers, which the file names only by identifier); sum of these 4.61992e-6 kg
- diesel: 7.3206e-6, 1.38011e-7, 2.32937e-7 kg (3 suppliers, which the file names only by identifier); sum of these 7.69154e-6 kg
- diesel, burned in agricultural machinery: 2.54754e-6 MJ
- diesel, burned in building machine: 1.24465e-7 MJ
- diesel, low-sulfur: 3.96608e-12, 9.55844e-11, 2.95028e-10, 1.79621e-12, 2.65547e-13, 8.00501e-12, 4.00384e-12 kg (7 suppliers, which the file names only by identifier); sum of these 4.08649e-10 kg
- electricity, low voltage: 1.12873e-6, 2.23688e-6, 6.15402e-5, 2.14876e-5, 3.83306e-7, 3.11326e-8, 7.25298e-6, 6.97058e-8, 5.63847e-6, 1.48046e-6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 kWh (11 suppliers, which the file names only by identifier); sum of these 0.000101628 kWh
- electricity, medium voltage: 7.57669e-7, 1.02304e-6, 3.0713e-7, 0.000255479, 2.70852e-5, 9.71531e-5, 9.71584e-7, 0.000257765, 3.63826e-7, 4.59118e-6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 kWh (58 suppliers, which the file names only by identifier); sum of these 0.006362 kWh
- esterquat: 2.13382e-10, 4.24771e-10 kg (2 suppliers, which the file names only by identifier); sum of these 6.38153e-10 kg
- ethanol, without water, in 99.7% solution state, from ethylene: 1.71765e-8, 3.82467e-8 kg (2 suppliers, which the file names only by identifier); sum of these 5.54232e-8 kg
- ethoxylated alcohol (AE11): 3.46214e-9 kg
- ethylene glycol: 3.56361e-9 kg
- ethylene glycol monoethyl ether: 2.74472e-8 kg
- ethylene vinyl acetate copolymer: 2.73406e-6, 1.37301e-6 kg (2 suppliers, which the file names only by identifier); sum of these 4.10707e-6 kg
- extrusion, plastic film: 2.30552e-7 kg
- ferrite: 3.96431e-7 kg
- fibre, cotton: 2.7788e-5 kg
- green liquor dregs: -2.07016e-6 kg
- hard coal: 1.2265e-6, 1.62742e-6, 7.37928e-7, 4.55785e-7, 5.91229e-6, 7.53038e-7, 5.74541e-7, 3.20237e-7, 1.75105e-7 kg (9 suppliers, which the file names only by identifier); sum of these 1.17828e-5 kg
- hazardous waste, for incineration: -1.28537e-6, -6.36762e-7, -1.66446e-8 kg (3 suppliers, which the file names only by identifier); sum of these -1.93877e-6 kg
- hazardous waste, for underground deposit: -5.78359e-6, -3.72535e-7 kg (2 suppliers, which the file names only by identifier); sum of these -6.15612e-6 kg
- heat, central or small-scale, other than natural gas: 0.00038147 MJ
- heat, district or industrial, natural gas: 0.000373009, 7.97438e-5, 9.34771e-5, 5.97231e-5, 9.81404e-7 MJ (5 suppliers, which the file names only by identifier); sum of these 0.000606935 MJ
- heat, district or industrial, other than natural gas: 1.1638e-7, 0.00930489, 3.9648e-6 MJ (3 suppliers, which the file names only by identifier); sum of these 0.00930897 MJ
- heavy fuel oil: 4.2354e-7, 3.56391e-9, 1.81182e-8, 2.34931e-8, 4.57197e-9, 6.12026e-9, 9.064e-8 kg (7 suppliers, which the file names only by identifier); sum of these 5.70048e-7 kg
- hydrochloric acid, without water, in 30% solution state: 2.31244e-8, 1.03548e-7 kg (2 suppliers, which the file names only by identifier); sum of these 1.26672e-7 kg
- hydrogen peroxide, without water, in 50% solution state: 2.59683e-8, 5.93834e-5 kg (2 suppliers, which the file names only by identifier); sum of these 5.94093e-5 kg
- hydrogen, liquid: 4.60491e-8, 2.10732e-7 kg (2 suppliers, which the file names only by identifier); sum of these 2.56781e-7 kg
- industrial furnace, 1MW, oil: 9.35931e-13 unit
- industrial furnace, natural gas: 5.21112e-12 unit
- industrial machine, heavy, unspecified: 1.14189e-8 kg
- inert waste: -2.68483e-7, -2.31236e-9, -9.46368e-7 kg (3 suppliers, which the file names only by identifier); sum of these -1.21716e-6 kg
- iron sulfate: 1.59213e-7, 7.86285e-8 kg (2 suppliers, which the file names only by identifier); sum of these 2.37841e-7 kg
- iron(III) chloride, without water, in 14% iron solution state: 3.44516e-8 kg
- iron(III) sulfate, without water, in 12.5% iron solution state: 1.43557e-7 kg
- isopropanol: 1.14189e-7 kg
- kraft paper: 2.09771e-6, 5.81074e-6 kg (2 suppliers, which the file names only by identifier); sum of these 7.90845e-6 kg
- lead: 1.67056e-6 kg
- lead concentrate: 1.02496e-5 kg
- light fuel oil: 2.78431e-7, 6.01014e-7, 2.76365e-8, 2.65729e-9, 6.15851e-8, 1.9748e-9, 1.83392e-9, 1.36934e-8 kg (8 suppliers, which the file names only by identifier); sum of these 9.88826e-7 kg
- lime: 2.99598e-5 kg
- lime, hydrated, packed: 1.74958e-6, 1.4851e-8 kg (2 suppliers, which the file names only by identifier); sum of these 1.76443e-6 kg
- limestone, unprocessed: 5.49676e-7, 5.69052e-9, 1.39167e-5 kg (3 suppliers, which the file names only by identifier); sum of these 1.4472e-5 kg
- liquefied petroleum gas: 1.1493e-7 kg
- lubricating oil: 2.32461e-8, 3.14622e-8 kg (2 suppliers, which the file names only by identifier); sum of these 5.47082e-8 kg
- magnesium: 3.51558e-9 kg
- magnesium oxide: 3.73779e-6 kg
- maintenance, transmission network, electricity, high voltage direct current land cable: 2.72464e-10 km*year
- maintenance, transmission network, electricity, high voltage direct current subsea cable: 2.21319e-9 km*year
- maize starch: 6.1955e-6 kg
- maleic unsaturated polyester resin: 1.50547e-6 kg
- manganese dioxide: 7.04294e-7 kg
- manganese sulfate: 2.12828e-9 kg
- meat and bone meal: 1.6807e-9, 2.83373e-12 kg (2 suppliers, which the file names only by identifier); sum of these 1.68353e-9 kg
- municipal solid waste: -7.35087e-5, -1.63133e-5, -2.78785e-10, -3.79619e-6, -4.54553e-10, -8.92779e-7, -3.18079e-10 kg (7 suppliers, which the file names only by identifier); sum of these -9.4512e-5 kg
- natural gas, high pressure: 1.22388e-8, 5.16603e-9, 2.95873e-8, 8.78039e-9, 4.96713e-7, 5.0768e-8, 2.06797e-7, 5.54174e-9, 1.63529e-10, 1.96779e-8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 m3 (29 suppliers, which the file names only by identifier); sum of these 1.9439e-5 m3
- nickel smelter slag: -1.61993e-9 kg
- nickel, class 1: 1.61993e-9 kg
- nitrogen, liquid: 3.06092e-6 kg
- nylon 6: 7.73094e-7, 3.81799e-7 kg (2 suppliers, which the file names only by identifier); sum of these 1.15489e-6 kg
- oil storage, 3000l: 1.16989e-11 unit
- oxygen, liquid: 8.66163e-5 kg
- packaging box factory: 1.13573e-14 unit
- packaging film, low density polyethylene: 1.90802e-7 kg
- paper, woodcontaining, lightweight coated: 3.73663e-6, 1.11e-5 kg (2 suppliers, which the file names only by identifier); sum of these 1.48367e-5 kg
- paper, woodfree, coated: 7.28083e-5 kg
- petrol, unleaded: 2.98926e-10, 3.442e-8, 1.11828e-9, 1.30516e-8, 1.23942e-9, 2.999e-10, 6.15763e-11 kg (7 suppliers, which the file names only by identifier); sum of these 5.04897e-8 kg
- petroleum coke: 1.97109e-8 kg
- phosphoric acid, industrial grade, without water, in 85% solution state: 7.94092e-9 kg
- pig iron: 4.09385e-8, 4.41994e-7 kg (2 suppliers, which the file names only by identifier); sum of these 4.82933e-7 kg
- plastic processing factory: 2.56649e-13 unit
- polyacrylamide: 4.51499e-7 kg
- polyester resin, unsaturated: 1.82389e-6, 1.24886e-5 kg (2 suppliers, which the file names only by identifier); sum of these 1.43125e-5 kg
- polyethylene, high density, granulate: 2.37364e-7 kg
- polyethylene, low density, granulate: 1.77412e-8 kg
- polymethyl methacrylate, beads: 1.49271e-7 kg
- polypropylene, granulate: 5.53107e-7 kg
- polyurethane, flexible foam: 0.000216551, 4.43538e-5 kg (2 suppliers, which the file names only by identifier); sum of these 0.000260905 kg
- polyvinylidenchloride, granulate: 6.04304e-10, 1.22364e-9 kg (2 suppliers, which the file names only by identifier); sum of these 1.82794e-9 kg
- potassium permanganate: 7.83294e-9 kg
- potato starch: 4.97992e-8 kg
- printer, laser, black/white: 1.54491e-9 unit
- printer, laser, colour: 1.54606e-9 unit
- printing ink, offset, without solvent, in 47.5% solution state: 6.2562e-8, 5.09657e-7 kg (2 suppliers, which the file names only by identifier); sum of these 5.72219e-7 kg
- propane: 4.19583e-7 kg
- pulp factory: 1.17482e-13 unit
- pulpwood, hardwood, measured as solid wood under bark: 4.44243e-7, 1.23421e-8 m3 (2 suppliers, which the file names only by identifier); sum of these 4.56585e-7 m3
- pulpwood, softwood, measured as solid wood under bark: 8.27085e-7, 1.01062e-8 m3 (2 suppliers, which the file names only by identifier); sum of these 8.37191e-7 m3
- quicklime, in pieces, loose: 3.63062e-6, 6.00832e-11 kg (2 suppliers, which the file names only by identifier); sum of these 3.63068e-6 kg
- quicklime, milled, loose: 2.30843e-8, 2.76223e-6 kg (2 suppliers, which the file names only by identifier); sum of these 2.78531e-6 kg
- residual softwood, wet: 5.4754e-6 m3
- rosin size, for paper production: 5.90028e-7, 1.23439e-6 kg (2 suppliers, which the file names only by identifier); sum of these 1.82442e-6 kg
- sand: 1.08986e-5 kg
- scrap copper: -3.95677e-9, -8.43341e-8, -4.17135e-10 kg (3 suppliers, which the file names only by identifier); sum of these -8.8708e-8 kg
- scrap steel: -1.93221e-8, -1.85235e-5, -1.52507e-5 kg (3 suppliers, which the file names only by identifier); sum of these -3.37936e-5 kg
- sheet rolling, aluminium: 1.30426e-6 kg
- silica sand: 1.12147e-5 kg
- silicone product: 2.00346e-10, 4.07751e-10 kg (2 suppliers, which the file names only by identifier); sum of these 6.08097e-10 kg
- silver: 4.90348e-10 kg
- sludge from pulp and paper production: -6.5545e-8, -5.91491e-6 kg (2 suppliers, which the file names only by identifier); sum of these -5.98046e-6 kg
- soda ash, dense: 2.14113e-6 kg
- sodium chlorate, powder: 3.45026e-7 kg
- sodium chloride, powder: 1.31905e-7 kg
- sodium dichromate: 5.74228e-9 kg
- sodium hydrogen sulfite: 5.05842e-10 kg
- sodium hydrosulfide: 5.86502e-7 kg
- sodium hydroxide, without water, in 50% solution state: 2.74123e-5 kg
- sodium hypochlorite, without water, in 15% solution state: 1.90611e-9, 9.04853e-9 kg (2 suppliers, which the file names only by identifier); sum of these 1.09546e-8 kg
- sodium silicate, spray powder, 80%: 3.35483e-5 kg
- sodium silicate, without water, in 37% solution state: 6.40253e-9, 3.16194e-9 kg (2 suppliers, which the file names only by identifier); sum of these 9.56447e-9 kg
- sodium sulfide: 1.66475e-8 kg
- spent solvent mixture: -5.64954e-8, -2.20747e-8 kg (2 suppliers, which the file names only by identifier); sum of these -7.85701e-8 kg
- steam, in chemical industry: 7.86194e-10, 4.4591e-9 kg (2 suppliers, which the file names only by identifier); sum of these 5.24529e-9 kg
- steel, low-alloyed: 2.64535e-5 kg
- steel, low-alloyed, hot rolled: 1.25099e-8 kg
- strontium carbonate: 2.0717e-7 kg
- sulfamic acid: 1.30506e-10 kg
- sulfidic tailings, from zinc-lead mine operation: -5.56338e-8, -9.99249e-9, -7.83195e-9, -1.88507e-8, -2.84111e-9, -6.85971e-9, -3.19976e-8, -1.45296e-8 kg (8 suppliers, which the file names only by identifier); sum of these -1.48537e-7 kg
- sulfite: 4.27387e-5 kg
- sulfite pulp, bleached: 2.66419e-7 kg
- sulfur: 1.47211e-5 kg
- sulfur dioxide, liquid: 1.54112e-5 kg
- sulfuric acid: 9.51004e-6, 1.47413e-6 kg (2 suppliers, which the file names only by identifier); sum of these 1.09842e-5 kg
- synthetic rubber: 9.37603e-9 kg
- tap water: 2.31752e-6, 9.19066e-8, 1.98036e-5, 1.71493e-7, 2.65206e-5, 6.02897e-8, 4.6199e-7 kg (7 suppliers, which the file names only by identifier); sum of these 4.94273e-5 kg
- textile, jute: 1.14865e-11 kg
- textile, woven cotton: 3.96469e-5 kg
- thermoforming, with calendering: 2.08473e-8 kg
- toner module, laser printer, black/white: 2.96623e-7 unit
- toner module, laser printer, colour: 2.96844e-7 unit
- transport, freight train: 3.86515e-6 metric ton*km
- transport, freight, inland waterways, barge: 5.14998e-6 metric ton*km
- transport, freight, lorry 16-32 metric ton, EURO3: 2.73102e-6, 1.12887e-5, 2.53213e-5 metric ton*km (3 suppliers, which the file names only by identifier); sum of these 3.9341e-5 metric ton*km
- transport, freight, lorry 16-32 metric ton, EURO4: 1.6106e-7 metric ton*km
- transport, freight, lorry 3.5-7.5 metric ton, EURO3: 2.21389e-10 metric ton*km
- transport, freight, lorry >32 metric ton, EURO3: 1.42606e-6 metric ton*km
- transport, freight, sea, container ship: 1.75959e-5 metric ton*km
- urea: 8.59372e-10, 5.48127e-9, 4.68062e-9 kg (3 suppliers, which the file names only by identifier); sum of these 1.10213e-8 kg
- used toner module, laser printer, black/white: -2.61028e-7 kg
- used toner module, laser printer, colour: -2.61222e-7 kg
- waste emulsion paint: -1.34987e-8, -1.27245e-9 kg (2 suppliers, which the file names only by identifier); sum of these -1.47712e-8 kg
- waste glass: -3.44148e-9, -2.68134e-11, -6.42274e-11, -6.96852e-10, -5.99232e-12, -1.32369e-9, -9.09967e-12, -6.56724e-9, -1.4571e-12 kg (9 suppliers, which the file names only by identifier); sum of these -1.21368e-8 kg
- waste graphical paper: -2.60024e-5 kg
- waste gypsum: -4.44431e-9, -9.40178e-8, -3.06108e-7 kg (3 suppliers, which the file names only by identifier); sum of these -4.0457e-7 kg
- waste mineral oil: -1.66035e-8, -1.68821e-6, -6.70687e-7 kg (3 suppliers, which the file names only by identifier); sum of these -2.3755e-6 kg
- waste paper, unsorted: -2.1823e-7, -1.02424e-5, -1.04323e-5 kg (3 suppliers, which the file names only by identifier); sum of these -2.0893e-5 kg
- waste paperboard: -2.55416e-11, -1.66586e-11, -3.10715e-9, -1.67261e-10, -4.10771e-10, -8.99929e-12, -9.22925e-11, -2.23338e-12 kg (8 suppliers, which the file names only by identifier); sum of these -3.83091e-9 kg
- waste paperboard, unsorted: -2.30996e-6, -2.30996e-6 kg (2 suppliers, which the file names only by identifier); sum of these -4.61992e-6 kg
- waste plastic, mixture: -2.34003e-6, -1.18246e-8, -5.5412e-9, -2.60891e-8, -8.40139e-5, -1.63815e-5, -1.56352e-7, -6.13236e-8, -6.45788e-8 kg (9 suppliers, which the file names only by identifier); sum of these -0.000103061 kg
- waste polyethylene: -3.4492e-12, -9.0391e-14, -2.41463e-11, -2.30462e-13, -1.74295e-14, -9.51892e-14, -3.84553e-14, -2.98936e-12 kg (8 suppliers, which the file names only by identifier); sum of these -3.10568e-11 kg
- waste polyethylene terephthalate: -2.18576e-11, -2.81178e-13, -6.96004e-13, -2.52199e-11, -1.27441e-13, -6.60921e-13, -1.76553e-10, -1.68509e-12 kg (8 suppliers, which the file names only by identifier); sum of these -2.27081e-10 kg
- waste polyethylene/polypropylene product: -2.53125e-7, -9.98468e-8, -2.99615e-9 kg (3 suppliers, which the file names only by identifier); sum of these -3.55968e-7 kg
- waste polypropylene: -2.14422e-11, -1.66683e-9, -9.71847e-12, -1.34637e-8, -5.30763e-11, -1.28503e-10, -5.04009e-11, -1.92323e-9 kg (8 suppliers, which the file names only by identifier); sum of these -1.73169e-8 kg
- waste polyurethane foam: -0.0002607, -2.04489e-7 kg (2 suppliers, which the file names only by identifier); sum of these -0.000260905 kg
- waste polyvinylchloride: -1.02587e-12, -5.32024e-12, -2.26341e-12, -5.60265e-12, -1.35646e-11, -2.03013e-10, -1.75948e-10, -1.42121e-9 kg (8 suppliers, which the file names only by identifier); sum of these -1.82794e-9 kg
- waste textile, soiled: -4.08524e-5, -9.06224e-6 kg (2 suppliers, which the file names only by identifier); sum of these -4.99146e-5 kg
- waste wire plastic: -2.04344e-7 kg
- waste wood, untreated: -9.54047e-11, -8.75376e-10, -1.30492e-9, -1.3943e-7, -5.53715e-10, -0.000799886, -3.66514e-9, -1.05096e-8 kg (8 suppliers, which the file names only by identifier); sum of these -0.000800042 kg
- waste yarn and waste textile: -1.26966e-5 kg
- waste, from silicon wafer production: -6.08097e-10 kg
- wastewater, average: -1.25308e-10, -2.08519e-8, -4.98612e-9 m3 (3 suppliers, which the file names only by identifier); sum of these -2.59633e-8 m3
- wastewater, unpolluted: -6.64902e-10, -1.37494e-7 m3 (2 suppliers, which the file names only by identifier); sum of these -1.38158e-7 m3
- water, deionised: 2.67851e-6, 0.000744082, 0.00241552 kg (3 suppliers, which the file names only by identifier); sum of these 0.00316228 kg
- white spirit: 1.59759e-7 kg
- wire drawing, copper: 8.80835e-7 kg
- wire drawing, steel: 2.44087e-5 kg
- wood ash mixture, pure: -6.59469e-7, -3.20808e-5 kg (2 suppliers, which the file names only by identifier); sum of these -3.27403e-5 kg
- yarn, cotton: 0.000174216 kg
- zinc: 1.42461e-6 kg
- zinc coat, coils: 3.12614e-8 m2
- zinc concentrate: 0.000914793 kg
- zinc oxide: 2.34887e-5 kg
- zinc slag: -0.000114693 kg

## Inputs from nature
- Occupation, construction site [natural resource, land]: 2.58841e-10 m2*year
- Occupation, seabed, infrastructure [natural resource, land]: 2.43451e-7 m2*year
- Transformation, from seabed, unspecified [natural resource, land]: 6.08629e-9 m2
- Transformation, to seabed, infrastructure [natural resource, land]: 6.08629e-9 m2
- Water, cooling, unspecified natural origin [natural resource, in water]: 3.55985e-5 m3
- Water, river [natural resource, in water]: 1.10997e-5 m3
- Water, unspecified natural origin [natural resource, in water]: 0.000235353 m3
- Water, well, in ground [natural resource, in water]: 5.69328e-7 m3

## Emissions to nature
- 2-Propanol [air, urban air close to ground]: 1.14189e-7 kg
- Acetaldehyde [air, urban air close to ground]: 3.25331e-14 kg
- Acetic acid [air, urban air close to ground]: 4.01855e-13 kg
- Acetone [air, urban air close to ground]: 3.0672e-14 kg
- Ammonia [air, unspecified]: 1.92391e-8 kg
- Ammonia [air, urban air close to ground]: 2.19126e-14 kg
- Antimony ion [air, unspecified]: 3.94077e-11 kg
- Arsenic ion [air, unspecified]: 1.04488e-10 kg
- Arsenic ion [air, urban air close to ground]: 2.65824e-15 kg
- Benzene [air, unspecified]: 9.49415e-12 kg
- Benzene [air, urban air close to ground]: 7.46432e-13 kg
- Benzene, ethyl- [air, urban air close to ground]: 5.07563e-9 kg
- Benzo(a)pyrene [air, unspecified]: 4.32935e-16 kg
- Benzo(a)pyrene [air, urban air close to ground]: 2.80452e-17 kg
- Butane [air, urban air close to ground]: 1.3445e-12 kg
- Cadmium II [air, unspecified]: 2.83225e-9 kg
- Calcium [air, urban air close to ground]: 2.24928e-14 kg
- Carbon dioxide, fossil [air, unspecified]: 0.000114824 kg
- Carbon dioxide, fossil [air, urban air close to ground]: 1.30178e-7 kg
- Carbon dioxide, non-fossil [air, unspecified]: 1.14222e-8 kg
- Carbon monoxide, fossil [air, unspecified]: 2.96963e-8 kg
- Carbon monoxide, fossil [air, urban air close to ground]: 5.86951e-12 kg
- Chlorine [air, unspecified]: 4.68518e-11 kg
- Chromium III [air, unspecified]: 2.61592e-12 kg
- Chromium III [air, urban air close to ground]: 1.01217e-15 kg
- Chromium VI [air, urban air close to ground]: 1.0224e-17 kg
- Cobalt II [air, unspecified]: 1.24507e-12 kg
- Cobalt II [air, urban air close to ground]: 6.74783e-15 kg
- Copper ion [air, unspecified]: 2.7143e-10 kg
- Copper ion [air, urban air close to ground]: 9.59877e-14 kg
- Dinitrogen monoxide [air, urban air close to ground]: 4.29166e-13 kg
- Dioxins, measured as 2,3,7,8-tetrachlorodibenzo-p-dioxin [air, unspecified]: 2.34036e-18 kg
- Dioxins, measured as 2,3,7,8-tetrachlorodibenzo-p-dioxin [air, urban air close to ground]: 2.07453e-22 kg
- Ethanol [air, urban air close to ground]: 6.13439e-14 kg
- Formaldehyde [air, unspecified]: 2.91694e-11 kg
- Formaldehyde [air, urban air close to ground]: 3.97334e-13 kg
- Heptane [air, urban air close to ground]: 4.96563e-8 kg
- Hydrocarbons, aliphatic, alkanes, unspecified [air, urban air close to ground]: 1.86265e-13 kg
- Hydrocarbons, aliphatic, unsaturated [air, urban air close to ground]: 6.13439e-15 kg
- Hydrocarbons, aromatic [air, urban air close to ground]: 3.46624e-14 kg
- Hydrocarbons, unspecified [air, non-urban air or from high stacks]: 1.46319e-9 kg
- Hydrochloric acid [air, unspecified]: 5.25238e-10 kg
- Hydrochloric acid [air, urban air close to ground]: 3.06902e-13 kg
- Hydrogen fluoride [air, urban air close to ground]: 1.10071e-14 kg
- Iron ion [air, urban air close to ground]: 1.67674e-13 kg
- Lead II [air, unspecified]: 2.61087e-9 kg
- Lead II [air, urban air close to ground]: 2.96496e-14 kg
- Manganese II [air, unspecified]: 2.06299e-11 kg
- Mercury II [air, unspecified]: 2.10241e-11 kg
- Mercury II [air, urban air close to ground]: 1.52731e-16 kg
- Methane, fossil [air, unspecified]: 1.76649e-9 kg
- Methane, fossil [air, urban air close to ground]: 4.46812e-12 kg
- Methanol [air, urban air close to ground]: 5.23811e-9 kg
- Molybdenum VI [air, unspecified]: 1.47977e-13 kg
- Molybdenum VI [air, urban air close to ground]: 1.63584e-15 kg
- NMVOC, non-methane volatile organic compounds [air, unspecified]: 4.54811e-9 kg
- Nickel II [air, unspecified]: 5.09146e-12 kg
- Nickel II [air, urban air close to ground]: 1.00195e-13 kg
- Nitrogen oxides [air, unspecified]: 4.74283e-6 kg
- Nitrogen oxides [air, urban air close to ground]: 1.26512e-6 kg
- PAH, polycyclic aromatic hydrocarbons [air, unspecified]: 8.94824e-14 kg
- PAH, polycyclic aromatic hydrocarbons [air, urban air close to ground]: 1.88066e-14 kg
- Particulate Matter, < 2.5 um [air, unspecified]: 3.16811e-9 kg
- Particulate Matter, < 2.5 um [air, urban air close to ground]: 2.1031e-12 kg
- Particulate Matter, > 10 um [air, unspecified]: 1.21373e-7 kg
- Particulate Matter, > 10 um [air, urban air close to ground]: 4.90751e-13 kg
- Particulate Matter, > 2.5 um and < 10um [air, unspecified]: 8.92712e-10 kg
- Particulate Matter, > 2.5 um and < 10um [air, urban air close to ground]: 2.45376e-13 kg
- Pentane [air, urban air close to ground]: 2.26115e-12 kg
- Propane [air, urban air close to ground]: 3.8102e-13 kg
- Propionic acid [air, urban air close to ground]: 3.72223e-14 kg
- Propylene oxide [air, urban air close to ground]: 9.53317e-9 kg
- Selenium IV [air, urban air close to ground]: 2.45376e-15 kg
- Sodium [air, urban air close to ground]: 1.5336e-13 kg
- Sulfur dioxide [air, unspecified]: 2.15648e-6 kg
- Sulfur dioxide [air, urban air close to ground]: 1.42604e-6 kg
- Sulfur oxides [air, unspecified]: 1.38545e-8 kg
- Sulfuric acid [air, unspecified]: 1.71924e-8 kg
- Toluene [air, urban air close to ground]: 4.48412e-9 kg
- VOC, volatile organic compounds [air, unspecified]: 4.0457e-11 kg
- Vanadium V [air, urban air close to ground]: 2.0448e-13 kg
- Water [air, non-urban air or from high stacks]: 3.45034e-9 m3
- Water [air, unspecified]: 4.88001e-5 m3
- Xylene [air, urban air close to ground]: 4.48373e-9 kg
- Zinc II [air, unspecified]: 2.79629e-8 kg
- Zinc II [air, urban air close to ground]: 1.03962e-13 kg
- Sulfur [soil, industrial]: 9.17015e-6 kg
- AOX, Adsorbable Organic Halogen [water, surface water]: 1.15009e-7 kg
- AOX, Adsorbable Organic Halogen [water, unspecified]: 6.65814e-10 kg
- Acidity, unspecified [water, surface water]: 1.92878e-10 kg
- Aluminium III [water, surface water]: 1.92812e-10 kg
- Ammonium [water, ocean]: 2.77481e-9 kg
- Ammonium [water, surface water]: 1.21138e-8 kg
- Ammonium [water, unspecified]: 8.79703e-10 kg
- Aniline [water, unspecified]: 4.39851e-11 kg
- Antimony ion [water, surface water]: 4.70414e-10 kg
- Antimony ion [water, unspecified]: 4.39851e-12 kg
- Arsenic ion [water, ocean]: 6.2075e-11 kg
- Arsenic ion [water, surface water]: 7.60266e-11 kg
- BOD5, Biological Oxygen Demand [water, surface water]: 6.74017e-6 kg
- BOD5, Biological Oxygen Demand [water, unspecified]: 1.61106e-9 kg
- COD, Chemical Oxygen Demand [water, ocean]: 5.91843e-9 kg
- COD, Chemical Oxygen Demand [water, surface water]: 5.90384e-5 kg
- COD, Chemical Oxygen Demand [water, unspecified]: 8.20072e-9 kg
- Cadmium II [water, ocean]: 5.04823e-11 kg
- Cadmium II [water, surface water]: 5.98771e-11 kg
- Calcium II [water, surface water]: 3.05409e-8 kg
- Chloride [water, surface water]: 9.27266e-8 kg
- Chlorine [water, unspecified]: 2.20788e-11 kg
- Chromium III [water, unspecified]: 7.29636e-13 kg
- Chromium VI [water, surface water]: 2.12828e-13 kg
- Chromium VI [water, unspecified]: 2.20788e-11 kg
- Cobalt II [water, surface water]: 1.33018e-13 kg
- Copper ion [water, ocean]: 1.96703e-11 kg
- Copper ion [water, surface water]: 1.81002e-10 kg
- Copper ion [water, unspecified]: 5.26097e-13 kg
- Cyanide [water, ocean]: 1.53725e-12 kg
- Cyanide [water, surface water]: 6.52532e-13 kg
- DOC, Dissolved Organic Carbon [water, surface water]: 2.18602e-5 kg
- DOC, Dissolved Organic Carbon [water, unspecified]: 1.38439e-9 kg
- Dissolved solids [water, surface water]: 1.90215e-9 kg
- Fluoride [water, ocean]: 2.41799e-9 kg
- Fluoride [water, surface water]: 3.2405e-9 kg
- Iron ion [water, ocean]: 2.66233e-10 kg
- Iron ion [water, surface water]: 1.19049e-9 kg
- Lead II [water, ocean]: 3.53835e-11 kg
- Lead II [water, surface water]: 2.91167e-10 kg
- Magnesium [water, surface water]: 7.50171e-8 kg
- Manganese II [water, surface water]: 7.28638e-9 kg
- Mercury II [water, ocean]: 5.57096e-12 kg
- Mercury II [water, surface water]: 7.28159e-12 kg
- Nickel II [water, ocean]: 5.08975e-12 kg
- Nickel II [water, surface water]: 2.52734e-13 kg
- Nickel II [water, unspecified]: 1.62141e-13 kg
- Nitrate [water, ocean]: 3.45882e-10 kg
- Nitrate [water, surface water]: 1.71793e-8 kg
- Nitrogen [water, ocean]: 6.71886e-9 kg
- Nitrogen [water, surface water]: 9.80996e-7 kg
- Nitrogen [water, unspecified]: 1.66109e-9 kg
- Nitrogen dioxide [water, surface water]: 1.9576e-11 kg
- Oils, unspecified [water, unspecified]: 2.57011e-10 kg
- Phenol [water, surface water]: 1.17456e-12 kg
- Phosphorus [water, surface water]: 4.0934e-8 kg
- Phosphorus [water, unspecified]: 5.81294e-11 kg
- Selenium IV [water, surface water]: 2.12776e-11 kg
- Sodium I [water, surface water]: 1.19955e-7 kg
- Sulfate [water, surface water]: 1.41482e-5 kg
- Sulfide [water, unspecified]: 4.39851e-11 kg
- Sulfuric acid [water, surface water]: 5.48466e-7 kg
- Suspended solids, unspecified [water, surface water]: 4.66435e-6 kg
- Suspended solids, unspecified [water, unspecified]: 2.15613e-9 kg
- TOC, Total Organic Carbon [water, surface water]: 2.18602e-5 kg
- TOC, Total Organic Carbon [water, unspecified]: 1.38439e-9 kg
- Thallium I [water, ocean]: 1.5923e-11 kg
- Water [water, surface water]: 1.79177e-7 m3
- Water [water, unspecified]: 0.000236685 m3
- Zinc II [water, ocean]: 1.37785e-9 kg
- Zinc II [water, surface water]: 2.53629e-9 kg
- Zinc II [water, unspecified]: 4.45026e-13 kg
