# suction, shavings, softwood

Dataset: EcoSpold 2, unit process
Geography: Europe without Switzerland
Time period: 2011-01-01 to 2022-12-31
Technology level: current
Classification: ISIC rev.4 ecoinvent: 1610:Sawmilling and planing of wood
Tags: Swiss brush-up completed
Scenario: Business-as-Usual
System model: Allocation at the point of substitution
Generated by: Frank Werner
Database: ecoinvent
isCopyrightProtected: true

## General comment
This data represents the service of collecting shavings from the planing of softwood, expressed per kg dry mass and transporting it to its silo via aspiration.

## Included activities start
The activity starts with the shavings at the planing machine.

## Included activities end
This activity ends with the shavings collected at a silo at the sawmill site. The dataset does not include direct wood dust emissions. The infrasturcture for the pipes and pumps as well as for the silo are assumed be part of the infrastructure DS for the sawmill.

## Geography
Represents average Swiss conditions assumed to be represenative for Europe

## Reference product
- shavings, softwood, measured as dry mass: 1 kg; source BFS 2013; By-product classification allocatable product; CPC 39283: Non-agglomerated wood waste and scrap; lognormal variance with pedigree 0.0251, pedigree (1,1,1,3,1)
  shavings recollected from the planing process where they are generated as loose shavings.
  production volume 9.05126e8 kg
    Scaled from the PV estimates of the Swiss sawmilling chain based UNECE data for 2013 for the production volumes of Switzerland (1'250'000 m3) and the production volume of Europe without Switzerland ( 97'570'000 m3 - 1'250'000 m3).
  property heating value, net 13.38 MJ
    LHV is calculated based on the Carbon content of the product. More details can be found on the respective documentation.
  property price 0.113 EUR2005
    Calculated based on data from FAOSTAT (accessed 20140429). The price is calculated by using data on total world import quantity (m3) and import value (1000 USD), year 2005. 40461924 m3 of Chips and Particles was imported in the world in 2005. The import value was 3022227000 USD. The calculated price is thus (3022227000/40461924=74.7*0.8=) 62.2 Euro/m3. It is estimated, that the chips and particles are half hardwood (of density 650 kg/m3) and half softwood (of density 450 kg/m3), thus the remaining mixture has a density of 550 kg/m3. The recalculated price is (1/550*62.2=) 0.11 Euro/kg. Using the same approach the calculated price for 2010 was 0.123 Euro/kg.
  properties: carbon allocation 0.494 kg, carbon content 0.494, carbon content, fossil 0, carbon content, non-fossil 0.494, dry mass 1 kg, water content 0.1, water in wet mass 0.1 kg, wet mass 1.1 kg

## Inputs from technosphere
- electricity, medium voltage: 0.0126571 kWh
- planing mill: 4.90828e-10 unit
- sawnwood, beam, softwood, raw, dried (u=10%): 9.42634e-5 m3
- sawnwood, beam, softwood, raw, dried (u=20%): 4.069e-5, 1.01725e-5 m3 (2 suppliers, which the file names only by identifier); sum of these 5.08625e-5 m3
- sawnwood, board, softwood, raw, dried (u=10%): 0.000169041 m3
- sawnwood, board, softwood, raw, dried (u=20%): 7.30096e-5, 1.82524e-5 m3 (2 suppliers, which the file names only by identifier); sum of these 9.1262e-5 m3
- sawnwood, lath, softwood, raw, dried (u=10%): 0.000232597 m3
- sawnwood, lath, softwood, raw, dried (u=20%): 0.000100504, 2.5126e-5 m3 (2 suppliers, which the file names only by identifier); sum of these 0.00012563 m3
- shavings, softwood, loose, measured as dry mass: -0.0338425 kg

## Sampling procedure
complementary literature and sampling from sawmills; CH data used to approximate European processes
