# transport, pipeline, long distance, natural gas

Dataset: EcoSpold 2, unit process
Geography: RoW
Time period: 1994-01-01 to 2022-12-31
Technology level: current
Classification: ISIC rev.4 ecoinvent: 4930:Transport via pipeline
Classification: EcoSpold01Categories: natural gas/production
Tags: ConvertedDataset
Scenario: Business-as-Usual
System model: Allocation at the point of substitution
Share of production covered: 100 %
Generated by: Mireille Faist Emmenegger (obsolete)
Published in: Faist Emmenegger, M. 2007
Database: ecoinvent
isCopyrightProtected: true

## General comment
[This dataset was already contained in the ecoinvent database version 2. It was not individually updated during the transfer to ecoinvent version 3. Life Cycle Impact Assessment results may still have changed, as they are affected by changes in the supply chain, i.e. in other datasets. This dataset was generated following the ecoinvent quality guidelines for version 2. It may have been subject to central changes described in the ecoinvent version 3 change report (http://www.ecoinvent.org/database/ecoinvent-version-3/reports-of-changes/), and the results of the central updates were reviewed extensively. The changes added e.g. consistent water flows and other information throughout the database. The documentation of this dataset can be found in the ecoinvent reports of version 2, which are still available via the ecoinvent website. The change report linked above covers all central changes that were made during the conversion process.]

## Included activities end
This dataset describes the energy consumption and the emissions linked to the transport of 1 tkm Russian natural gas in an onshore pipeline.

## Geography
The data for emissions and for energy requirements is based on German data.

## Technology
Long-distance gas transport onshore with average compressor station.

## Time period
The data for emissions is from 1994, the data for energy requirements from 2001.

## Reference product
- transport, pipeline, long distance, natural gas: 1 metric ton*km; By-product classification allocatable product; CPC 65131: Transport services via pipeline of petroleum and natural gas
  EcoSpold01Location=RU
  production volume 2.42726e12 metric ton*km
    Extrapolated as 3 times the amount in Europe, Russia, and Algeria, using the relative lenght of pipeline according to CIA World Factbook 2009
  property price 0.106 EUR2005
    Same calculations in file R61. The variations is due to industry price per MJ, which has been updated to prices in EU27 in 2005 (http://epp.eurostat.ec.europa.eu/tgm/table.do?tab=table&init=1&language=en&pcode=ten00112&plugin=1).
  properties: carbon allocation 0 kg, carbon content 0

## Inputs from technosphere
- natural gas, burned in gas turbine: 0.975867 MJ; = (0.788+1.18)/2*(36.0/36.3)
  Based on information from industry experts (German and Swiss data from 2001, ecoinvent report version 2). Values from tab. 7.14 in Faist Emmengger et al. (2007) reintroduced for v3.9 to reflect that the reference product of 'natural gas, burned in gas turbine' was changed back to the fuel input (rather than the output of electricity). Amount for GLO estimated based on arithmetic mean of RER and RU. The amount is corrected for the difference in NCV (v2: 36.3 vs. v3.9: 36.0 MJ/m3) assumed in the supplying datasets.
- natural gas, high pressure: 1.8204e-5, 7.68394e-6, 4.4008e-5, 1.30599e-5, 0.00073881, 7.55122e-5, 8.24278e-6, 2.43232e-7, 2.92688e-5, 3.07358e-5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 m3 (24 suppliers, which the file names only by identifier); sum of these 0.00220926 m3; lognormal variance with pedigree 0.0532, pedigree (2,3,5,5,1)
  Published data
  EcoSpold01Location=RU
  Uncertainty: published data
  properties: carbon content, fossil 0.602381, dry mass 0.84 kg, heating value, net 36 MJ, wet mass 0.84 kg
  note on carbon content, fossil: An average C content of 0.506 kg C/ m3 has been assumed (this average has been calculated using data in Tab 3.5, ecoinvent v2.2 report 6_V
  note on heating value, net: Literature value, Source: Christoph Meili;Niels Jungbluth;Maresa Bussa (2021) Life cycle inventories of crude oil and natural gas extraction. ESU-services Ltd. commissioned by BAFU & VSG, Schaffhausen, Switzerland, http://esu-services.ch/data/public-lci-reports/
- pipeline, natural gas, long distance, high capacity, offshore: 1.0201e-10 km; lognormal variance with pedigree 0.3726, pedigree (3,3,5,5,3)
  EcoSpold01Location=GLO
  Based on estimated standard capacity and statistics
  Uncertainty: based on estimated standard capacity and statistics
- pipeline, natural gas, long distance, high capacity, onshore: 1.8816e-9 km; lognormal variance with pedigree 0.3726, pedigree (3,3,5,5,3)
  EcoSpold01Location=GLO
  Based on estimated standard capacity
  Uncertainty: based on estimated standard capacity
- pipeline, natural gas, long distance, low capacity, onshore: 7.72417e-10 km; lognormal variance with pedigree 0.3726, pedigree (3,3,5,5,3)
  (same comment as for pipeline, natural gas, long distance, high capacity, offshore)
- waste mineral oil: -1.16e-6 kg; lognormal variance with pedigree 0.0132, pedigree (2,3,1,5,1)
  Based on dutch data
  EcoSpold01Location=CH
  Uncertainty: based on dutch data
  production volume
    Calculated from the production volume of transport, pipeline, long distance, natural gas in proportion to the respective output amounts.
  properties: carbon content, fossil 0.864444, dry mass 0.9 kg, heating value, net 34.7 MJ, water content 0.111111, wet mass 1 kg
  note on carbon content, fossil: Tab A.6, ecoinvent v2.2 report 13_I. C content has been calculated after data in the tables, and then referred to 1 kg DM
  note on heating value, net: Value taken from the general comment of the treatment dataset.

## Emissions to nature
- Butane [air, non-urban air or from high stacks]: 2.20906e-6 kg; lognormal variance with pedigree 0.1906, pedigree (2,5,5,5,1)
  Calculated based on leakage and gas composition
  Uncertainty: calculated based on leakage and gas composition
- Carbon dioxide, fossil [air, non-urban air or from high stacks]: 2.44878e-6 kg; lognormal variance with pedigree 0.0706, pedigree (2,5,5,5,1)
  (same comment as for Butane)
- Ethane [air, non-urban air or from high stacks]: 1.5152e-5 kg; lognormal variance with pedigree 0.1906, pedigree (2,5,5,5,1)
  (same comment as for Butane)
- Mercury II [air, non-urban air or from high stacks]: 2.20941e-11 kg; lognormal variance with pedigree 0.118, pedigree (4,5,5,5,1)
  (same comment as for Butane)
- Methane, bromochlorodifluoro-, Halon 1211 [air, non-urban air or from high stacks]: 2.24e-8 kg; lognormal variance with pedigree 0.0832, pedigree (2,3,5,5,1)
  Dutch environmental report + qualified estimates
  Uncertainty: dutch environmental report + qualified estimates
- Methane, chlorodifluoro-, HCFC-22 [air, non-urban air or from high stacks]: 6.92999e-8 kg; lognormal variance with pedigree 0.0832, pedigree (2,3,5,5,1)
  (same comment as for Methane, bromochlorodifluoro-, Halon 1211)
- Methane, fossil [air, non-urban air or from high stacks]: 0.00157752 kg; lognormal variance with pedigree 0.1906, pedigree (2,5,5,5,1)
  (same comment as for Butane)
- NMVOC, non-methane volatile organic compounds [air, non-urban air or from high stacks]: 2.14912e-6 kg; lognormal variance with pedigree 0.1906, pedigree (2,5,5,5,1)
  (same comment as for Butane)
- Propane [air, non-urban air or from high stacks]: 4.68818e-6 kg; lognormal variance with pedigree 0.1906, pedigree (2,5,5,5,1)
  (same comment as for Butane)

## Sampling procedure
statistics

## Extrapolations
none This dataset has been copied from an original dataset covering the geography RU. The uncertainty has been adjusted accordingly.

## Review by Michael Spielmann (obsolete) 2003-09-22
Passed.
