# treatment of basic oxygen furnace dust, residual material landfill

Dataset: EcoSpold 2, unit process
Geography: GLO
Time period: 1987-01-01 to 2022-12-31
Technology level: current
Classification: ISIC rev.4 ecoinvent: 3821:Treatment and disposal of non-hazardous waste
Scenario: Business-as-Usual
System model: Allocation at the point of substitution
Generated by: Avraam Symeonidis
Database: ecoinvent
isCopyrightProtected: true

## General comment
Steelmaking produces large quantities of by-products, with around 450-500 kg of by-products produced per tonne of steel. The main components of these are slags (approximately 80%), along with dusts and sludges from air pollution abatement equipment (flue gas scrubbing) and mill scale. The physical or chemical natures of these by-products means that it can be difficult to find possible uses. Hence, most of these by-products have historically been disposed of in landfills. However, new legislation and financial instruments, such as landfill taxes, mean that landfilling is now a costly and undesirable management solution. Instead, considerable efforts have been made to recover by-products for internal reuse or to sell them to other industries to recover value. The fraction of steelmaking by-products that is sent to landfill has drastically reduced. This activity represents the disposal of 'basic oxygen furnace dust' in a residual material landfill. This type of landfill is designed to receive mostly inorganic (low carbon, <5 w-%) wastes in a physically stable form. Further information is provided in ecoinvent report no. 13, Part II: Landfills – Underground Deposits – Landfarming (Doka, 2009).
References
Doka, G. (2009). Life cycle inventories of waste treatment services. Ecoinvent report no. 13. Swiss Centre for Life Cycle Inventories, Dubendorf, Switzerland.
Inventoried waste contains 100% basic oxygen furnace dust; .
waste composition (wet, in ppm): H2O 1000; O 312480; H n.a.; C 18100; S 1250; N n.a.; P n.a.; B n.a.; Cl n.a.; Br n.a.; F n.a.; I n.a.; Ag n.a.; As n.a.; Ba n.a.; Cd n.a.; Co 200; Cr 100; Cu 1000; Hg n.a.; Mn 4900; Mo n.a.; Ni 900; Pb 1400; Sb 3100; Se n.a.; Sn 2000; V n.a.; Zn 7130; Be n.a.; Sc n.a.; Sr n.a.; Ti n.a.; Tl n.a.; W n.a.; Si 10100; Fe 528000; Ca 86900; Al 12900; K n.a.; Mg 8540; Na n.a.;
Share of carbon in waste that is biogenic 0%.
Additional solidification with 0.4 kg of cement. Note that value for oxygen content was calculated by assuming that other elements in the material are present as oxides and that any missing mass (either not reported or not detected) was assumed to be oxygen.

## Included activities start
Activity starts with the reception of the waste.

## Included activities end
Waste-specific short-term emissions to water from leachate. Long-term emissions from landfill to ground water. Expenditures for solidification with cement.

## Technology
Time period based on the range of years of publication from which composition data were taken. Note that the Residual Material Landfill modelling tool was published in 2009.

## Reference product
- basic oxygen furnace dust: -1 kg; name RP; By-product classification Waste; CPC 39310: Slag, dross, scalings and other waste from the manufacture of iron or steel
  production volume 3.64278e9 kg
    Assuming that 15.6% of basic oxygen furnace dust is sent for disposal in landfill (worldsteel, 2010).
    References:
    Worldsteel (2010). Steel industry by-products. World Steel Association: Brussels, Belgium.
  property aluminium content 0.0129129
    The value of 'aluminium content' is documented in Turner & Symeonidis, 2020.
    Reference: Turner David & Symeonidis Avraam, 2020, Life cycle inventories of the treatment of iron and steelmaking by-products, ecoinvent association, Zürich, Switzerland
  property antimony content 0.0031031
    The value of 'antimony content' is documented in Turner & Symeonidis, 2020.
    Reference: Turner David & Symeonidis Avraam, 2020, Life cycle inventories of the treatment of iron and steelmaking by-products, ecoinvent association, Zürich, Switzerland
  property calcium content 0.086987
    The value of 'calcium content' is documented in Turner & Symeonidis, 2020.
    Reference: Turner David & Symeonidis Avraam, 2020, Life cycle inventories of the treatment of iron and steelmaking by-products, ecoinvent association, Zürich, Switzerland
  property carbon content, fossil 0.0181181
    The value of 'carbon content, fossil' is documented in Turner & Symeonidis, 2020.
    Reference: Turner David & Symeonidis Avraam, 2020, Life cycle inventories of the treatment of iron and steelmaking by-products, ecoinvent association, Zürich, Switzerland
  property carbon content, non-fossil 0
    The value of 'carbon content, non-fossil' is documented in Turner & Symeonidis, 2020.
    Reference: Turner David & Symeonidis Avraam, 2020, Life cycle inventories of the treatment of iron and steelmaking by-products, ecoinvent association, Zürich, Switzerland
  property chromium content 0.0001001
    The value of 'chromium content' is documented in Turner & Symeonidis, 2020.
    Reference: Turner David & Symeonidis Avraam, 2020, Life cycle inventories of the treatment of iron and steelmaking by-products, ecoinvent association, Zürich, Switzerland
  property cobalt content 0.0002002
    The value of 'cobalt content' is documented in Turner & Symeonidis, 2020.
    Reference: Turner David & Symeonidis Avraam, 2020, Life cycle inventories of the treatment of iron and steelmaking by-products, ecoinvent association, Zürich, Switzerland
  property copper content 0.001001
    The value of 'copper content' is documented in Turner & Symeonidis, 2020.
    Reference: Turner David & Symeonidis Avraam, 2020, Life cycle inventories of the treatment of iron and steelmaking by-products, ecoinvent association, Zürich, Switzerland
  property heating value, net 0 MJ
    Non combustible products are assumed to have an LHV equal to zero (0).
  property iron content 0.528529
    The value of 'iron content' is documented in Turner & Symeonidis, 2020.
    Reference: Turner David & Symeonidis Avraam, 2020, Life cycle inventories of the treatment of iron and steelmaking by-products, ecoinvent association, Zürich, Switzerland
  property lead content 0.0014014
    The value of 'lead content' is documented in Turner & Symeonidis, 2020.
    Reference: Turner David & Symeonidis Avraam, 2020, Life cycle inventories of the treatment of iron and steelmaking by-products, ecoinvent association, Zürich, Switzerland
  property magnesium content 0.00854855
    The value of 'magnesium content' is documented in Turner & Symeonidis, 2020.
    Reference: Turner David & Symeonidis Avraam, 2020, Life cycle inventories of the treatment of iron and steelmaking by-products, ecoinvent association, Zürich, Switzerland
  property manganese content 0.0049049
    The value of 'manganese content' is documented in Turner & Symeonidis, 2020.
    Reference: Turner David & Symeonidis Avraam, 2020, Life cycle inventories of the treatment of iron and steelmaking by-products, ecoinvent association, Zürich, Switzerland
  property nickel content 0.000900901
    The value of 'nickel content' is documented in Turner & Symeonidis, 2020.
    Reference: Turner David & Symeonidis Avraam, 2020, Life cycle inventories of the treatment of iron and steelmaking by-products, ecoinvent association, Zürich, Switzerland
  property oxygen content 0.312793
    The value of 'oxygen content' is documented in Turner & Symeonidis, 2020.
    Reference: Turner David & Symeonidis Avraam, 2020, Life cycle inventories of the treatment of iron and steelmaking by-products, ecoinvent association, Zürich, Switzerland
  property price 0 EUR2005
    Waste products are assigned a price of zero as they are assumed to require further treatment.
  property silicon content 0.0101101
    The value of 'silicon content' is documented in Turner & Symeonidis, 2020.
    Reference: Turner David & Symeonidis Avraam, 2020, Life cycle inventories of the treatment of iron and steelmaking by-products, ecoinvent association, Zürich, Switzerland
  property sulfur content 0.00125125
    The value of 'sulfur content' is documented in Turner & Symeonidis, 2020.
    Reference: Turner David & Symeonidis Avraam, 2020, Life cycle inventories of the treatment of iron and steelmaking by-products, ecoinvent association, Zürich, Switzerland
  property tin content 0.002002
    The value of 'tin content' is documented in Turner & Symeonidis, 2020.
    Reference: Turner David & Symeonidis Avraam, 2020, Life cycle inventories of the treatment of iron and steelmaking by-products, ecoinvent association, Zürich, Switzerland
  property zinc content 0.00713714
    The value of 'zinc content' is documented in Turner & Symeonidis, 2020.
    Reference: Turner David & Symeonidis Avraam, 2020, Life cycle inventories of the treatment of iron and steelmaking by-products, ecoinvent association, Zürich, Switzerland
  properties: carbon allocation 0.0181 kg, carbon content 0.0181181, dry mass 0.999 kg, water content 0.001001, water in wet mass 0.001 kg, wet mass 1 kg

## Inputs from technosphere
- cement, unspecified: 0.4 kg; lognormal variance with pedigree 0.091084, pedigree (1,1,5,5,4)
  Cement for solidification of residual material waste. Uncertainty in mass from solidification recipe.
  properties: dry mass 1 kg, wet mass 1 kg
- process-specific burdens, residual material landfill: 0.280494, 0.71109, 0.00841689 kg (3 suppliers, which the file names only by identifier); sum of these 1 kg; lognormal variance with pedigree 0.082, pedigree (1,1,5,5,4)
  demands per kilogram waste. uncertainty is heeded in the module
- residual material landfill: 2.08333e-9 unit; lognormal variance with pedigree 0.082, pedigree (1,1,5,5,4)
  demands per kilogram waste. uncertainty is heeded in the module
- waste cement, hydrated: -0.00841689, -0.280494, -0.71109 kg (3 suppliers, which the file names only by identifier); sum of these -1 kg; lognormal variance with pedigree 0.059084, pedigree (1,1,4,5,4)
  Hydrated cement for solidification of residual material waste. Uncertainty in mass from solidification recipe.
  production volume
    Calculated based on the production volume of the reference product.
  properties: dry mass 1 kg, wet mass 1 kg

## Emissions to nature
- Aluminium III [water, ground-, long-term]: 0.00382939 kg; lognormal variance with pedigree 0.787901, pedigree (1,1,5,5,4)
  uncertainty is calculated from uncertainties in waste composition and transfer coefficients in incinerator and landfills.
- Aluminium III [water, surface water]: 6.39298e-6 kg; lognormal variance with pedigree 1.16359, pedigree (1,1,5,5,4)
  uncertainty is calculated from uncertainties in waste composition and transfer coefficients in residual landfill
- Antimony ion [water, ground-, long-term]: 0.00200676 kg; lognormal variance with pedigree 0.599393, pedigree (1,1,5,5,4)
  (same comment as for Aluminium III)
- Antimony ion [water, surface water]: 0.00109324 kg; lognormal variance with pedigree 0.623543, pedigree (1,1,5,5,4)
  (same comment as for Aluminium III)
- BOD5, Biological Oxygen Demand [water, ground-, long-term]: 0.00966918 kg; lognormal variance with pedigree 0.427484, pedigree (1,1,5,5,4)
  (same comment as for Aluminium III)
- BOD5, Biological Oxygen Demand [water, surface water]: 1.61422e-5 kg; lognormal variance with pedigree 1.0229, pedigree (1,1,5,5,4)
  (same comment as for Aluminium III)
- COD, Chemical Oxygen Demand [water, ground-, long-term]: 0.0295605 kg; lognormal variance with pedigree 0.427484, pedigree (1,1,5,5,4)
  (same comment as for Aluminium III)
- COD, Chemical Oxygen Demand [water, surface water]: 4.93498e-5 kg; lognormal variance with pedigree 1.0229, pedigree (1,1,5,5,4)
  (same comment as for Aluminium III)
- Calcium II [water, ground-, long-term]: 0.00785212 kg; lognormal variance with pedigree 1.66076, pedigree (1,1,5,5,4)
  (same comment as for Aluminium III)
- Calcium II [water, surface water]: 1.31087e-5 kg; lognormal variance with pedigree 1.11716, pedigree (1,1,5,5,4)
  (same comment as for Aluminium III)
- Chromium VI [water, ground-, long-term]: 1.89887e-5 kg; lognormal variance with pedigree 1.05067, pedigree (1,1,5,5,4)
  (same comment as for Aluminium III)
- Chromium VI [water, surface water]: 6.01126e-6 kg; lognormal variance with pedigree 1.21172, pedigree (1,1,5,5,4)
  (same comment as for Aluminium III)
- Cobalt II [water, ground-, long-term]: 3.41926e-5 kg; lognormal variance with pedigree 1.73176, pedigree (1,1,5,5,4)
  (same comment as for Aluminium III)
- Cobalt II [water, surface water]: 5.70829e-8 kg; lognormal variance with pedigree 1.76878, pedigree (1,1,5,5,4)
  (same comment as for Aluminium III)
- Copper ion [water, ground-, long-term]: 3.84945e-5 kg; lognormal variance with pedigree 3.392, pedigree (1,1,5,5,4)
  (same comment as for Aluminium III)
- Copper ion [water, surface water]: 6.42646e-8 kg; lognormal variance with pedigree 1.75371, pedigree (1,1,5,5,4)
  (same comment as for Aluminium III)
- DOC, Dissolved Organic Carbon [water, ground-, long-term]: 0.0116972 kg; lognormal variance with pedigree 0.427484, pedigree (1,1,5,5,4)
  (same comment as for Aluminium III)
- DOC, Dissolved Organic Carbon [water, surface water]: 1.95278e-5 kg; lognormal variance with pedigree 1.0229, pedigree (1,1,5,5,4)
  (same comment as for Aluminium III)
- Iron ion [water, ground-, long-term]: 0.00264632 kg; lognormal variance with pedigree 7.10567, pedigree (1,1,5,5,4)
  (same comment as for Aluminium III)
- Iron ion [water, surface water]: 4.4179e-6 kg; lognormal variance with pedigree 1.37725, pedigree (1,1,5,5,4)
  (same comment as for Aluminium III)
- Lead II [water, ground-, long-term]: 7.26195e-6 kg; lognormal variance with pedigree 7.61692, pedigree (1,1,5,5,4)
  (same comment as for Aluminium III)
- Lead II [water, surface water]: 1.21235e-8 kg; lognormal variance with pedigree 1.97465, pedigree (1,1,5,5,4)
  (same comment as for Aluminium III)
- Magnesium [water, ground-, long-term]: 0.000970339 kg; lognormal variance with pedigree 1.65086, pedigree (1,1,5,5,4)
  (same comment as for Aluminium III)
- Magnesium [water, surface water]: 1.61993e-6 kg; lognormal variance with pedigree 1.33923, pedigree (1,1,5,5,4)
  (same comment as for Aluminium III)
- Manganese II [water, ground-, long-term]: 4.04754e-5 kg; lognormal variance with pedigree 6.28762, pedigree (1,1,5,5,4)
  (same comment as for Aluminium III)
- Manganese II [water, surface water]: 6.75717e-8 kg; lognormal variance with pedigree 1.75407, pedigree (1,1,5,5,4)
  (same comment as for Aluminium III)
- Nickel II [water, ground-, long-term]: 0.000325834 kg; lognormal variance with pedigree 1.01138, pedigree (1,1,5,5,4)
  (same comment as for Aluminium III)
- Nickel II [water, surface water]: 5.43963e-7 kg; lognormal variance with pedigree 1.47178, pedigree (1,1,5,5,4)
  (same comment as for Aluminium III)
- Silicon [water, ground-, long-term]: 0.0100773 kg; lognormal variance with pedigree 0.448211, pedigree (1,1,5,5,4)
  (same comment as for Aluminium III)
- Silicon [water, surface water]: 2.27144e-5 kg; lognormal variance with pedigree 0.996924, pedigree (1,1,5,5,4)
  (same comment as for Aluminium III)
- Sulfate [water, ground-, long-term]: 0.00334767 kg; lognormal variance with pedigree 0.711387, pedigree (1,1,5,5,4)
  (same comment as for Aluminium III)
- Sulfate [water, surface water]: 0.000402332 kg; lognormal variance with pedigree 0.824646, pedigree (1,1,5,5,4)
  (same comment as for Aluminium III)
- TOC, Total Organic Carbon [water, ground-, long-term]: 0.0116972 kg; lognormal variance with pedigree 0.427484, pedigree (1,1,5,5,4)
  (same comment as for Aluminium III)
- TOC, Total Organic Carbon [water, surface water]: 1.95278e-5 kg; lognormal variance with pedigree 1.0229, pedigree (1,1,5,5,4)
  (same comment as for Aluminium III)
- Tin ion [water, ground-, long-term]: 3.78986e-5 kg; lognormal variance with pedigree 4.58213, pedigree (1,1,5,5,4)
  (same comment as for Aluminium III)
- Tin ion [water, surface water]: 6.32698e-8 kg; lognormal variance with pedigree 1.75779, pedigree (1,1,5,5,4)
  (same comment as for Aluminium III)
- Zinc II [water, ground-, long-term]: 8.73853e-5 kg; lognormal variance with pedigree 5.33412, pedigree (1,1,5,5,4)
  (same comment as for Aluminium III)
- Zinc II [water, surface water]: 1.45885e-7 kg; lognormal variance with pedigree 1.6558, pedigree (1,1,5,5,4)
  (same comment as for Aluminium III)

## Sampling procedure
For more details about sampling procedures, refer to: Turner, D. & Symeonidis, A. (2020). Life cycle inventories of the treatment of iron and steelmaking by-products, ecoinvent association, Zürich, Switzerland.
