# treatment of sewage sludge, 75% water, WWT, WW from soft fibreboard production, sanitary landfill

Dataset: EcoSpold 2, unit process
Geography: GLO
Time period: 1994-01-01 to 2022-12-31
Technology level: current
Classification: ISIC rev.4 ecoinvent: 3821:Treatment and disposal of non-hazardous waste
Scenario: Business-as-Usual
System model: Allocation at the point of substitution
Generated by: Nikolia Stoikou
Database: ecoinvent
isCopyrightProtected: true

## General comment
The process represents the treatment of a waste (sewage sludge) that is exclusively generated from another waste treatment. Sewage sludge is generated in the wastewater treatment of 'wastewater from soft fibreboard production'. Recommended use of this dataset: to be used within the specific chain of treatments for 'wastewater from soft fibreboard production'. Share of biogenic carbon in the sludge: 98.97%. Landfill gas capture and utilisation generates 0.03321 kWh of electricity and 0.0599 MJ of useful heat. 0.002598 kg waste mass remains in the landfill even after the long term period.

## Included activities start
The activity starts with the waste being available at the gate of the treatment facility. Collection and transportation of the waste to the treatment plant is not included.

## Included activities end
The activity ends with the waste being treated and waste-specific emissions from the landfill are released to the environment (air due to landfil gas and water due to landfil leachate).

## Geography
Landfill site with mean annual temperature (MAT) of 16.743579766537 degC, mean annual precipitation (MAP) of 1250.84108527132 mm/year, and net infiltration of 790.252035689178 mm/year.The leachate percolating through the landfill has an average residence time of 6.33 years.
References: UN data, 2020. Precipitation, Environment Statistics Database, United Nations Statistics Division Available at: http://data.un.org/Data.aspx?q=precipitation&d=ENV&f=variableID%3a6;
World Bank, 2022. Surface area (sq.km), World Bank Group Available at: https://data.worldbank.org/indicator/AG.SRF.TOTL.K2;
Doka G.,2021. A model for composition-specific life cycle inventories of regionalised wastewater fates, Zurich, Switzerland. http://www.doka.ch/publications.htm

## Technology
Sanitary (controlled) landfill for municipal solid waste. Ultimate average landfill height is 20 meters. Operation phase duration is 30 years. The total raw landfill gas mass produced in the landfill from this waste is 0.1453 kg. The total CH4 mass in the raw landfill gas is 0.08225 kg. Percentage of landfill gas directly emitted is 47w%. Percentage of landfill gas captured and flared is 18.02w%. Percentage of landfill gas captured and utilised is 34.98%. Conversion efficiencies are 27.8e% for electricity and 13.5e% for useful heat. Leachate generated during the first 100 years is collected and treated region-specifically before emission. Based on average waste composition and climate data the end of carbonate phase is estimated to be reached 2'863 years after waste deposition.

## Reference product
- heat, district or industrial, other than natural gas: 1 MJ; By-product classification allocatable product; CPC 17300: Steam and hot water; lognormal variance with pedigree 0.11354, pedigree (1,1,1,1,1)
  Net production of heat from landfill gas utilisation.
  Uncertainty: Uncertainty calculated depending on waste input and uncertainty of transfer coefficients in landfill to landfill gas, uncertainty in gas capture and utilisation.
  production volume 26806.3 MJ
    Calculated from the production volume of the reference product in proportion to the respective output amounts.
  property price 0.0106 EUR2005
    Average European district heat price from Ecoheatcool and Euroheat 2005-2006, Ecoheat Work package 1: The European heat market. Final report. 10.6 EUR/GJ i s the price of district heat. http://www.solarthermalworld.org/files/Ecoheatcool%20WP1%20Web.pdf?download
  properties: carbon allocation 0 kg, carbon content 0, carbon content, fossil 0, carbon content, non-fossil 0, dry mass 1 kg, heating value, net 1 MJ, water content 0, water in wet mass 0 kg, wet mass 1 kg

## Inputs from technosphere
- acrylic dispersion, with water, in 58% solution state: 9.17908e-7 kg
- acrylic varnish, with water, in 53% solution state: 3.01598e-7 kg
- aluminium scrap, post-consumer: -1.92066e-5 kg
- aluminium, wrought alloy: 1.92066e-5 kg
- chemical, inorganic: 2.88389e-8 kg
- chemical, organic: 2.88389e-8 kg
- chimney: 7.33668e-11 m
- copper scrap, sorted, pressed: -1.73692e-6 kg
- copper, cathode: 1.92991e-6 kg
- corrugated board box: 2.02579e-5, 4.70207e-5, 7.54608e-7 kg (3 suppliers, which the file names only by identifier); sum of these 6.80332e-5 kg
- diesel, low-sulfur: 5.83487e-11, 1.40623e-9, 7.30969e-10, 2.64257e-11, 3.9067e-12, 1.17769e-10, 5.89042e-11 kg (7 suppliers, which the file names only by identifier); sum of these 2.40255e-9 kg
- electricity, low voltage: 1.56983e-5, 3.11104e-5, 0.000298849, 5.33101e-6, 0.000106808, 9.69467e-7, 7.40347e-5, 2.18014e-5 kWh (8 suppliers, which the file names only by identifier); sum of these 0.000554602 kWh
- electricity, medium voltage: 1.11901e-6, 3.49167e-7, 1.49633e-5, 1.03982e-8, 5.30559e-8, 3.20364e-6, 1.75235e-7 kWh (7 suppliers, which the file names only by identifier); sum of these 1.98738e-5 kWh
- ethylene glycol monoethyl ether: 4.04188e-7 kg
- ethylene vinyl acetate copolymer: 1.59348e-7, 6.96812e-8 kg (2 suppliers, which the file names only by identifier); sum of these 2.29029e-7 kg
- extrusion, plastic film: 1.35548e-6 kg
- hazardous waste, for incineration: -1.33751e-7, -5.69981e-8, -1.48989e-9 kg (3 suppliers, which the file names only by identifier); sum of these -1.92239e-7 kg
- heat, district or industrial, natural gas: 8.79472e-6, 0.000324797, 0.000879485, 1.44522e-5 MJ (4 suppliers, which the file names only by identifier); sum of these 0.00122753 MJ
- heavy fuel oil: 1.82005e-8, 1.53149e-10, 7.78579e-10, 1.00955e-9, 1.96467e-10, 2.63001e-10, 9.00871e-9 kg (7 suppliers, which the file names only by identifier); sum of these 2.96099e-8 kg
- industrial furnace, 1MW, oil: 5.50258e-12 unit
- industrial furnace, natural gas: 3.06375e-11 unit
- industrial machine, heavy, unspecified: 1.68155e-7 kg
- isopropanol: 1.68155e-6 kg
- kraft paper: 3.08614e-5, 1.43106e-5 kg (2 suppliers, which the file names only by identifier); sum of these 4.5172e-5 kg
- lead: 3.40573e-6 kg
- light fuel oil: 9.40311e-9, 9.33333e-10, 8.97413e-11, 4.81774e-9, 6.66926e-11, 6.19348e-11, 4.62449e-10 kg (7 suppliers, which the file names only by identifier); sum of these 1.5835e-8 kg
- maintenance, transmission network, electricity, high voltage direct current subsea cable: 5.47105e-9 km*year
- maize starch: 4.25455e-7 kg
- municipal solid waste: -2.50251e-9, -7.75714e-7, -9.01122e-10, -1.76987e-6, -6.3057e-10 kg (5 suppliers, which the file names only by identifier); sum of these -2.54962e-6 kg
- natural gas, high pressure: 1.60844e-9, 6.78929e-10, 3.88841e-9, 1.15393e-9, 6.52789e-8, 6.67202e-9, 7.28305e-10, 2.14912e-11, 2.5861e-9, 2.71572e-9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 m3 (26 suppliers, which the file names only by identifier); sum of these 2.80563e-7 m3
- oil storage, 3000l: 6.87811e-11 unit
- packaging box factory: 6.67722e-14 unit
- packaging film, low density polyethylene: 1.12177e-6 kg
- paper, woodfree, coated: 0.00107218 kg
- polyethylene, high density, granulate: 1.35548e-6 kg
- polypropylene, granulate: 4.44523e-7 kg
- potato starch: 2.92782e-7 kg
- printing ink, offset, without solvent, in 47.5% solution state: 1.55005e-7, 7.50489e-6 kg (2 suppliers, which the file names only by identifier); sum of these 7.6599e-6 kg
- scrap copper: -8.64895e-9, -1.84342e-7 kg (2 suppliers, which the file names only by identifier); sum of these -1.92991e-7 kg
- scrap steel: -6.09212e-10, -4.80844e-7 kg (2 suppliers, which the file names only by identifier); sum of these -4.81453e-7 kg
- sheet rolling, aluminium: 1.92066e-5 kg
- spent solvent mixture: -8.31954e-7, -3.25073e-7 kg (2 suppliers, which the file names only by identifier); sum of these -1.15703e-6 kg
- steel, low-alloyed: 4.81453e-6 kg
- synthetic rubber: 1.38072e-7 kg
- textile, woven cotton: 2.17521e-7 kg
- thermoforming, with calendering: 3.06998e-7 kg
- waste emulsion paint: -1.98783e-7, -1.87381e-8 kg (2 suppliers, which the file names only by identifier); sum of these -2.17521e-7 kg
- waste paper, unsorted: -4.94313e-7, -0.00015081, -0.000150908 kg (3 suppliers, which the file names only by identifier); sum of these -0.000302212 kg
- waste paperboard, unsorted: -3.40166e-5, -3.40166e-5 kg (2 suppliers, which the file names only by identifier); sum of these -6.80332e-5 kg
- waste plastic, mixture: -7.17624e-9, -3.6263e-11, -8.00084e-11, -2.55359e-8, -5.02377e-8, -4.79489e-10, -1.88063e-10, -1.98046e-10 kg (8 suppliers, which the file names only by identifier); sum of these -8.39317e-8 kg
- waste wire plastic: -4.44523e-7 kg
- white spirit: 2.35262e-6 kg
- wire drawing, copper: 1.92991e-6 kg
- zinc coat, coils: 7.72786e-8 m2

## Inputs from nature
- Occupation, seabed, infrastructure [natural resource, land]: 6.01816e-7 m2*year
- Transformation, from seabed, unspecified [natural resource, land]: 1.50454e-8 m2
- Transformation, to seabed, infrastructure [natural resource, land]: 1.50454e-8 m2
- Water, unspecified natural origin [natural resource, in water]: 3.40271e-8 m3

## Emissions to nature
- 2-Propanol [air, urban air close to ground]: 1.68155e-6 kg
- Acetaldehyde [air, urban air close to ground]: 1.9127e-13 kg
- Acetic acid [air, urban air close to ground]: 2.36261e-12 kg
- Acetone [air, urban air close to ground]: 1.80328e-13 kg
- Ammonia [air, urban air close to ground]: 1.2883e-13 kg
- Arsenic ion [air, urban air close to ground]: 1.56285e-14 kg
- Benzene [air, urban air close to ground]: 4.38847e-12 kg
- Benzene, ethyl- [air, urban air close to ground]: 7.47439e-8 kg
- Benzo(a)pyrene [air, urban air close to ground]: 1.64885e-16 kg
- Butane [air, urban air close to ground]: 7.90467e-12 kg
- Calcium [air, urban air close to ground]: 1.32241e-13 kg
- Carbon dioxide, fossil [air, urban air close to ground]: 7.65348e-7 kg
- Carbon monoxide, fossil [air, urban air close to ground]: 3.45083e-11 kg
- Chromium III [air, urban air close to ground]: 5.95082e-15 kg
- Chromium VI [air, urban air close to ground]: 6.01093e-17 kg
- Cobalt II [air, urban air close to ground]: 3.96722e-14 kg
- Copper ion [air, urban air close to ground]: 5.64336e-13 kg
- Dinitrogen monoxide [air, urban air close to ground]: 2.52318e-12 kg
- Dioxins, measured as 2,3,7,8-tetrachlorodibenzo-p-dioxin [air, urban air close to ground]: 1.21967e-21 kg
- Ethanol [air, urban air close to ground]: 3.60657e-13 kg
- Formaldehyde [air, urban air close to ground]: 2.33603e-12 kg
- Heptane [air, urban air close to ground]: 7.31241e-7 kg
- Hydrocarbons, aliphatic, alkanes, unspecified [air, urban air close to ground]: 1.0951e-12 kg
- Hydrocarbons, aliphatic, unsaturated [air, urban air close to ground]: 3.60657e-14 kg
- Hydrocarbons, aromatic [air, urban air close to ground]: 2.03789e-13 kg
- Hydrochloric acid [air, urban air close to ground]: 1.80435e-12 kg
- Hydrogen fluoride [air, urban air close to ground]: 6.47137e-14 kg
- Iron ion [air, urban air close to ground]: 9.85796e-13 kg
- Lead II [air, urban air close to ground]: 1.74318e-13 kg
- Mercury II [air, urban air close to ground]: 8.97947e-16 kg
- Methane, fossil [air, urban air close to ground]: 2.62692e-11 kg
- Methanol [air, urban air close to ground]: 7.71357e-8 kg
- Molybdenum VI [air, urban air close to ground]: 9.61753e-15 kg
- Nickel II [air, urban air close to ground]: 5.89071e-13 kg
- Nitrogen oxides [air, urban air close to ground]: 3.55016e-10 kg
- PAH, polycyclic aromatic hydrocarbons [air, urban air close to ground]: 1.10569e-13 kg
- Particulate Matter, < 2.5 um [air, urban air close to ground]: 1.23647e-11 kg
- Particulate Matter, > 10 um [air, urban air close to ground]: 2.88525e-12 kg
- Particulate Matter, > 2.5 um and < 10um [air, urban air close to ground]: 1.44263e-12 kg
- Pentane [air, urban air close to ground]: 1.32939e-11 kg
- Propane [air, urban air close to ground]: 2.24011e-12 kg
- Propionic acid [air, urban air close to ground]: 2.18839e-13 kg
- Propylene oxide [air, urban air close to ground]: 1.40386e-7 kg
- Selenium IV [air, urban air close to ground]: 1.44263e-14 kg
- Sodium [air, urban air close to ground]: 9.01644e-13 kg
- Sulfur dioxide [air, urban air close to ground]: 5.16156e-10 kg
- Toluene [air, urban air close to ground]: 6.60299e-8 kg
- Vanadium V [air, urban air close to ground]: 1.20219e-12 kg
- Water [air, non-urban air or from high stacks]: 2.02854e-8 m3
- Xylene [air, urban air close to ground]: 6.60277e-8 kg
- Zinc II [air, urban air close to ground]: 6.11222e-13 kg
- BOD5, Biological Oxygen Demand [water, surface water]: 2.39695e-10 kg
- COD, Chemical Oxygen Demand [water, unspecified]: 1.92104e-8 kg
- DOC, Dissolved Organic Carbon [water, unspecified]: 7.11495e-9 kg
- TOC, Total Organic Carbon [water, unspecified]: 7.11495e-9 kg
- Water [water, unspecified]: 1.37417e-8 m3
