# drying of maize grain

Dataset: EcoSpold 2, unit process
Geography: CA-QC
Time period: 2000-01-01 to 2022-12-31
Technology level: old
Classification: EcoSpold01Categories: agricultural means of production/work processes
Classification: ISIC rev.4 ecoinvent: 0163:Post-harvest crop activities
Synonyms: corn drying
Scenario: Business-as-Usual
System model: Allocation at the point of substitution
Generated by: François Saunier
Published in: Nemecek, T. 2007
Database: ecoinvent
isCopyrightProtected: true

## General comment
The functional unit is kg of water evaporated. This module should be used when evaluating drying of maize grain in column dryer.

## Included activities start
From reception of grains, at the silo gate. Drying process starting from grains, wet.

## Included activities end
This activity ends with dried grains at silo gate.
The dataset is a service dataset. It includes the energy demand (supplied by consumption of electricity and natural gas) for evaporating 1kg of water, when drying grain at low moisture content at low temperature (60°C) . The data for energy demand are based on the drying at farm, in column dryer, at low temperature of maize from 25% to 14% moisture content. Also included in the inventory is the infrastructure (building and machinery) and land use.
The dataset does not include waste and air emissions (like dust). Grain input, production of the wet educt and utilisation of the dried product are not included.

## Geography
The inventories are based on Quebec technical data (for energy consumption) and indications made by drying plants in Switzerland and values given in international references (Western Europe).

## Technology
Drying at farm, in column dryer, at low temperature (60°C) of grains like maize. Fan motor power is 9.7 kW, and mixing is performed with 3 motors of 3.9 kW each. Evaporation capacity is 5.38 t/h of dried maize grain.

Column dryer is a rather old technology, commonly used in 2000's. It is replaced by more efficient technologies like hot air silo dryer or air recirculation dryer (CRAAQ, 2010). After drying, grains are usually stored in a 350 tonnes capacity ventilated silo for about 10 days.
Dust and particulate emission to air are not considered.

## Time period
Electricity and heat consumption are based on a 2010 report from the CRAAQ. Other data are most based on publications between 2001 and 2002.

## Parameters
- evaporation capacity: 789.1 kg/hour; name evaporation_capacity; lognormal variance with pedigree 0.0007, pedigree (1,2,1,1,1)
  kilogram of water evaporated per hour.
  Reference :
  BEAUREGARD, G. (2013). Production budget of agricultural productions in Quebec. Technical report for CIRAIG.
  based on: CRAAQ (2010). Séchage des grains - Données techniques. AGDEX 736, juin 2010, 6p. [Centre de Référence en Agriculture et Agroalimentaire du Québec]
- motor power: 21.4 kW; name motor_power; lognormal variance with pedigree 0.0007, pedigree (1,2,1,1,1)
  low voltage
  Reference :
  BEAUREGARD, G. (2013). Production budget of agricultural productions in Quebec. Technical report for CIRAIG.
  based on: CRAAQ (2010). Séchage des grains - Données techniques. AGDEX 736, juin 2010, 6p. [Centre de Référence en Agriculture et Agroalimentaire du Québec]

## Reference product
- drying of maize grain: 1 l; By-product classification allocatable product; CPC 86111: Post-harvest crop services
  The functional unit is 1 kg of water evaporated.This dataset is a service dataset. Grain input, production of the wet educt and utilisation of the dried product are not included.
  The grain input and the evaporated water and dried grain outputs have to be added in the dataset which is using this service
  production volume 4 l
    This is a placeholder value that does not reflect real-world production volumes. This dataset does not currently require a real-world production volume to work in the database framework, and no actual data were collected yet. This has no negative effect on the results of the ecoinvent database.
  property price 0.0793901 EUR2005
    Calculated based on inputs: The price of the product has been calculated as a sum of the values of the material and energy inputs for this product. This value is therefore a rough estimation. It may underestimate the real price since there are additional expenses when producing any product. These expences can include for example labour costs, treatment of waste materials and profit for the producer. Please consider carefully whether this level of data quality is acceptable for your application.
  properties: carbon allocation 0 kg, carbon content 0

## Inputs from technosphere
- building, hall: 6.7e-5 m2; lognormal variance with pedigree 0.3501, pedigree (3,2,4,1,4)
  EcoSpold01Location=CH
  This data has been copied from the "drying of bread, seed and legumes, GLO" dataset. The uncertainty has been adjusted accordingly.
  Estimation. A typical grain-drying plant consists of the dryer itself, built on a surface area of 150 square meters (about 12 m * 12 m), and up to four storeys in height (Häusermann 2002). Most plants do not have a storehouse. As with the drying plants for grass and maize, this surface is included as "building, hall", with a lifetime of 50 years as well. The total surface area of a plant, including building surface and surroundings, was also estimated to be 3000 square meters (Häusermann 2002). The total surface area of a plant was also included for the building and dismantling phases as "occupation, construction site". The area of the building, and of the land transformation, calculated for one kilogram evaporated water, is obtained by dividing the total surface area of the building or of the environs by the annual yield of dried product, the water evaporated per kilogram of dried product and by the lifetime of the infrastructure.
  The capacity utilization rate is 4/12 (4 months per year)
- cast iron: 0.00583 kg; lognormal variance with pedigree 0.0561, pedigree (4,2,4,1,4)
  This data has been copied from the "drying of bread, seed and legumes, GLO" dataset. The uncertainty has been adjusted accordingly.
  Estimation. An estimate of the total weight of the machines was made (40 tonnes for grain-drying plants) which was calculated as cast iron, the main component of this machinery (Kunz 2002, Walia 2002). The weight for the heater inventoried in this module (5 tonnes) was subtracted from the estimated weight of the machinery used in the drying process. The weight of the machinery, balanced as cast iron, per kilogram of water evaporated, was calculated in the same way as the area of the building and the land transformation. The expected useful life of the machinery was 25 years. Construction and Maintenance processes for the machinery were not included.
  Further References
  Personal communication from R. Walia, Wirtech AG. Uetendorf, Switzerland, November 2002.
  EcoSpold01Location=RER
  properties: carbon content, fossil 0.04, dry mass 1 kg, wet mass 1 kg
  note on carbon content, fossil: Cast iron is made by remelting pig iron in small furnaces (e.g. cupola furnaces or electric arc furnaces) and poured into moulds to make castings. It usually contains 2% to 6% carbon (ecoinvent v2.2 report 10_partII). An average content of 4% was considered
- electricity, low voltage: 0.0271195 kWh; = motor_power/evaporation_capacity; source CRAAQ 2010; lognormal variance with pedigree 0.008, pedigree (1,1,4,1,1)
  Literature value. Electricity is used for operating the fan and for the mixing of grains in the silo. (230V)
  EcoSpold01Location=CH
  Uncertainty: Calculated variable. Uncertainty will be determined from propagation of uncertainty factors of underlying variables.
- heat, district or industrial, natural gas: 5.7428 MJ; source CRAAQ 2010; lognormal variance with pedigree 0.0186, pedigree (1,5,4,5,1)
  Literature value. Heat from propane (assuming 24.7 MJ/L propane), for drying of maize grain in column dryer.
  properties: heating value, net 1 MJ

## Inputs from nature
- Occupation, construction site [natural resource, land]: 0.0375 m2*year; lognormal variance with pedigree 0.0901, pedigree (3,2,4,1,4)
  This data has been copied from the "drying of bread, seed and legumes, GLO" dataset. The uncertainty has been adjusted accordingly.
  Estimation. A typical grain-drying plant consists of the dryer itself, built on a surface area of 150 square meters (about 12 m * 12 m), and up to four storeys in height (Häusermann 2002). Most plants do not have a storehouse. As with the drying plants for grass and maize, this surface is included as "building, hall", with a lifetime of 50 years as well. The total surface area of a plant, including building surface and surroundings, was also estimated to be 3000 square meters (Häusermann 2002). The total surface area of a plant was also included for the building and dismantling phases as "occupation, construction site". The area of the building, and of the land transformation, calculated for one kilogram evaporated water, is obtained by dividing the total surface area of the building or of the environs by the annual yield of dried product, the water evaporated per kilogram of dried product and by the lifetime of the infrastructure.
- Occupation, industrial area [natural resource, land]: 0.625 m2*year; lognormal variance with pedigree 0.0901, pedigree (3,2,4,1,4)
  (same comment as for Occupation, construction site)
- Transformation, from pasture, man made [natural resource, land]: 0.00025 m2; lognormal variance with pedigree 0.1701, pedigree (3,2,4,1,4)
  This data has been copied from the "drying of bread, seed and legumes, GLO" dataset. The uncertainty has been adjusted accordingly.
  Estimation. It was assumed that there was a transformation from "pasture and meadow" occupancy to "industrial area" occupancy. The area of the building, and of the land transformation, calculated for one kilogram evaporated water, is obtained by dividing the total surface area of the building or of the environs by the annual yield of dried product, the water evaporated per kilogram of dried product and by the lifetime of the infrastructure.
- Transformation, to industrial area [natural resource, land]: 0.00025 m2; lognormal variance with pedigree 0.1701, pedigree (3,2,4,1,4)
  (same comment as for Transformation, from pasture, man made)

## Extrapolations
This dataset has been copied from the original dataset "drying of bread grain, seed and legumes, GLO" and has beed adapted with specific data for energy consumption in maize grain drying. The uncertainty has been adjusted accordingly.

## Review by Emilia Moreno Ruiz 2017-06-27
unit changed to liter; amounts adjusted
