# treatment of waste emulsion paint, municipal incineration

Dataset: EcoSpold 2, unit process
Geography: RoW
Time period: 2006-01-01 to 2022-12-31
Technology level: current
Classification: ISIC rev.4 ecoinvent: 3821:Treatment and disposal of non-hazardous waste
Synonyms: Kehrichtverbrennung; municipal waste incineration; Siedlungsabfallverbrennung
Scenario: Business-as-Usual
System model: Allocation at the point of substitution
Share of production covered: 1.8 %
Generated by: Gabor Doka
Published in: Doka G. 2013
Database: ecoinvent
isCopyrightProtected: true

## General comment
This dataset represents the activity of waste disposal of waste emulsion paint in a municipal solid waste incinerator (MSWI) // Recommended use of this dataset: For small amounts of dried waste emulsion paint, which go to disposal as part of communal waste mixture, e.g. small leftovers or paint on other material. Larger amounts of waste paint, unused liquid paint or removed (stripped) paint are to be disposed in hazardous waste incinerator. // // Waste composition (wet, in ppm): upper heating value 11.14 MJ/kg; lower heating value 10.51 MJ/kg; H2O n.a.; O 214760; H 31708; C 268330; S n.a.; N n.a.; P n.a.; B n.a.; Cl 86465; Br n.a.; F n.a.; I n.a.; Ag n.a.; As 0.44122; Ba n.a.; Cd 0.016849; Co n.a.; Cr 1.248; Cu n.a.; Hg 0.0085442; Mn n.a.; Mo n.a.; Ni 0.95527; Pb 0.64946; Sb n.a.; Se n.a.; Sn n.a.; V n.a.; Zn 6.5444; Be n.a.; Sc n.a.; Sr n.a.; Ti 135000; Tl n.a.; W n.a.; Si 149810; Fe n.a.; Ca 113920; Al n.a.; K n.a.; Mg n.a.; Na n.a.; // Share of carbon in waste that is biogenic 0%. // Share of metals in waste not oxidised and bulk-recyclable (exclude very small or thin parts) Iron: 0%; Alu: 0%; Copper: 0%. // One kg of this waste produces 0.7064 kg of slag and 0.1612 kg of residues, which are landfilled. Additional solidification with 0.06448 kg of cement. // Net energy production: 1.14MJ/kg electric energy and 2.51MJ/kg thermal energy. // Recovery of metal scrap to recycling: 0g iron scrap, 0g aluminium scrap, 0g copper scrap.

## Included activities start
waste incineration from waste reception gate and delivery into waste bunker at incinerator plant site (without transports to the incinerator)

## Included activities end
Waste-specific short-term emissions to water from leachate. Long-term emissions from landfill to ground water.

## Geography
Specific to the technology mix encountered in Switzerland in 2010. Well applicable to modern incineration practices in Europe, North America or Japan.

## Technology
average Swiss MSWI plants in 2010 (grate incinerators) with electrostatic precipitator for fly ash (ESP), wet flue gas scrubber and 25% SNCR , 42.77% SCR-high dust , 32.68% SCR-low dust -DeNOx facilities and 0% without Denox (weighted according to mass of burnt waste, representing Swiss average). Efficiency of iron scrap separation from slag : 58%. Efficiency of non-ferrous scrap separation from slag : 31%. Gross electric efficiency technology mix 15.84% and Gross thermal efficiency technology mix 28.51%

## Time period
Waste composition as given in literature reference, theoretical data or other source. Transfer coefficients for modern MSWI.

## Reference product
- heat, for reuse in municipal waste incineration only: 1 MJ; name E_th_prod_MSWI; By-product classification allocatable product; CPC 17300: Steam and hot water; lognormal variance with pedigree 0.082743, pedigree (1,1,1,1,1)
  Net electricity generated from this waste and used in internal MSWI plant energy redistribution.
  Uncertainty: uncertainty is calculated from uncertainties in waste composition and uncertainties in energy efficiency and the uncertainty in internal energy demand
  production volume 5.40878e9 MJ
    calculated in proportion to reference product waste input to incinerator
  property exergy 0.1842 MJ; name E_th_prod_MSWI_exergy
    This exergy property is based on the exergy content of the product.
  property price 0.0106 EUR2005
    Average European district heat price from Ecoheatcool and Euroheat 2005-2006, Ecoheat Work package 1: The European heat market. Final report. 10.6 EUR/GJ i s the price of district heat. http://www.solarthermalworld.org/files/Ecoheatcool%20WP1%20Web.pdf?download
  property true value relation 0.1842; name E_th_prod_MSWI_true_value_relation
    property to calculate "true value" from
  properties: carbon allocation 0 kg, carbon content 0

## Inputs from technosphere
- acetic acid, without water, in 98% solution state: 4.4055e-10 kg
- acrylic dispersion, with water, in 58% solution state: 4.78046e-8 kg
- acrylic varnish, with water, in 53% solution state: 1.57072e-8 kg
- activated carbon, granular: 1.61737e-9 kg
- alkyd paint, white, without solvent, in 60% solution state: 7.19797e-6, 3.42129e-5 kg (2 suppliers, which the file names only by identifier); sum of these 4.14109e-5 kg
- aluminium casting facility: 7.92509e-18 unit
- aluminium oxide, non-metallurgical: 3.2426e-8, 1.91531e-7 kg (2 suppliers, which the file names only by identifier); sum of these 2.23957e-7 kg
- aluminium scrap, new: -2.78583e-8, -2.78583e-8 kg (2 suppliers, which the file names only by identifier); sum of these -5.57166e-8 kg
- aluminium scrap, post-consumer: -1.00028e-6 kg
- aluminium, cast alloy: 5.58078e-7 kg
- aluminium, primary, ingot: 4.71545e-8, 8.56214e-9 kg (2 suppliers, which the file names only by identifier); sum of these 5.57166e-8 kg
- aluminium, wrought alloy: 5.24652e-6 kg
- ammonia, anhydrous, liquid: 2.18913e-10, 2.29444e-11, 4.8448e-10, 8.43248e-10, 1.12771e-10, 1.0257e-10, 2.4265e-9, 7.24873e-11 kg (8 suppliers, which the file names only by identifier); sum of these 4.28392e-9 kg
- asbestos, crysotile type: 4.77926e-5 kg
- brass: 1.32833e-7, 6.675e-10 kg (2 suppliers, which the file names only by identifier); sum of these 1.335e-7 kg
- bronze: 8.67098e-6 kg
- cast iron: 9.67875e-6 kg
- clay: 1.29887e-12, 8.46188e-9 kg (2 suppliers, which the file names only by identifier); sum of these 8.46318e-9 kg
- copper, cathode: 9.24435e-6 kg
- corrugated board box: 1.05503e-6, 2.44884e-6, 3.93e-8 kg (3 suppliers, which the file names only by identifier); sum of these 3.54317e-6 kg
- diesel: 1.11473e-6 kg
- diesel, burned in building machine: 1.34168e-7 MJ
- diesel, burned in diesel-electric generating set, 10MW: 4.01442e-8 MJ
- electricity, low voltage: 8.17569e-7, 1.62023e-6, 1.5564e-5, 2.77639e-7, 5.56254e-6, 5.04898e-8, 3.85573e-6, 1.13542e-6 kWh (8 suppliers, which the file names only by identifier); sum of these 2.88836e-5 kWh
- electricity, medium voltage: 4.10659e-9, 1.15578e-8, 0.0018517, 1.10483e-9, 3.07782e-10, 3.7552e-9, 4.03708e-7, 5.21427e-10, 1.98509e-8, 1.01675e-6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 kWh (50 suppliers, which the file names only by identifier); sum of these 0.00186879 kWh
- electronic component machinery, unspecified: 2.8135e-8 unit
- electronics, for control units: 2.0025e-7 kg
- ethoxylated alcohol (AE7): 4.35379e-10, 2.0668e-9 kg (2 suppliers, which the file names only by identifier); sum of these 2.50218e-9 kg
- ethylene glycol monoethyl ether: 2.10501e-8 kg
- flat glass, coated: 8.57968e-8 kg
- flat glass, uncoated: 5.12926e-8, 2.49083e-7 kg (2 suppliers, which the file names only by identifier); sum of these 3.00375e-7 kg
- fly ash and scrubber sludge: -1.76125e-10, -1.48797e-8, -5.86938e-9 kg (3 suppliers, which the file names only by identifier); sum of these -2.09252e-8 kg
- glass wool mat: 4.77926e-5 kg
- glued laminated timber, average glue mix: 5.35862e-8, 1.16346e-7 m3 (2 suppliers, which the file names only by identifier); sum of these 1.69932e-7 m3
- hazardous waste, for incineration: -6.13886e-8, -2.95216e-8, -7.71676e-10 kg (3 suppliers, which the file names only by identifier); sum of these -9.16819e-8 kg
- hazardous waste, for underground deposit: -1.54774e-8, -9.96938e-10 kg (2 suppliers, which the file names only by identifier); sum of these -1.64743e-8 kg
- heat, district or industrial, natural gas: 2.41785e-5, 0.000215603, 1.69155e-5, 5.23518e-5, 8.60274e-7, 2.0236e-9 MJ (6 suppliers, which the file names only by identifier); sum of these 0.000309911 MJ
- heat, district or industrial, other than natural gas: 6.65407e-6, 6.77559e-10, 3.08271e-9, 0.00221102 MJ (4 suppliers, which the file names only by identifier); sum of these 0.00221768 MJ
- hydrochloric acid, without water, in 30% solution state: 2.30305e-10, 1.03127e-9 kg (2 suppliers, which the file names only by identifier); sum of these 1.26158e-9 kg
- industrial machine, heavy, unspecified: 8.75749e-9 kg
- inert waste, for final disposal: -3.15343e-7, -4.84378e-5 kg (2 suppliers, which the file names only by identifier); sum of these -4.87531e-5 kg
- isopropanol: 1.3981e-7, 1.10036e-8 kg (2 suppliers, which the file names only by identifier); sum of these 1.50814e-7 kg
- kaolin: 1.98603e-7 kg
- lead: 4.91414e-7 kg
- lime, hydrated, packed: 2.05183e-9, 1.74166e-11 kg (2 suppliers, which the file names only by identifier); sum of these 2.06925e-9 kg
- lubricating oil: 3.87478e-7, 8.16238e-8 kg (2 suppliers, which the file names only by identifier); sum of these 4.69102e-7 kg
- maize starch: 6.90958e-9 kg
- marine engine: 3.51941e-7 unit
- methyl ethyl ketone: 1.242e-10, 4.68673e-11 kg (2 suppliers, which the file names only by identifier); sum of these 1.71068e-10 kg
- nitric acid, without water, in 50% solution state: 3.06307e-10, 3.98482e-9, 4.55125e-10, 1.13181e-9, 1.47189e-9, 5.42304e-10, 1.86518e-9, 4.91722e-10, 4.5344e-10, 1.60474e-10 kg (10 suppliers, which the file names only by identifier); sum of these 1.08631e-8 kg
- nitrogen, liquid: 4.27378e-7, 1.17312e-7 kg (2 suppliers, which the file names only by identifier); sum of these 5.44691e-7 kg
- paper, woodfree, coated: 5.5839e-5 kg
- pig iron: 9.22327e-7, 9.95793e-6 kg (2 suppliers, which the file names only by identifier); sum of these 1.08803e-5 kg
- pitch: 6.66071e-11, 3.53464e-10, 1.01305e-8, 5.04603e-10, 4.4578e-8, 1.74229e-10, 7.88558e-9, 3.05709e-9 kg (8 suppliers, which the file names only by identifier); sum of these 6.675e-8 kg
- polyethylene terephthalate, granulate, amorphous: 1.17415e-8 kg
- polyethylene, high density, granulate: 1.55838e-5 kg
- polypropylene, granulate: 1.42006e-5 kg
- polystyrene, expandable: 1.35166e-5 kg
- polyurethane, flexible foam: 1.12188e-5, 2.29782e-6 kg (2 suppliers, which the file names only by identifier); sum of these 1.35166e-5 kg
- polyurethane, rigid foam: 4.78061e-7, 9.68012e-7 kg (2 suppliers, which the file names only by identifier); sum of these 1.44607e-6 kg
- polyvinylidenchloride, granulate: 4.46848e-6, 9.0481e-6 kg (2 suppliers, which the file names only by identifier); sum of these 1.35166e-5 kg
- printing ink, offset, without solvent, in 47.5% solution state: 3.72394e-7 kg
- propane, burned in building machine: 8.82184e-8 MJ
- propylene glycol, liquid: 9.95445e-8, 4.91608e-8 kg (2 suppliers, which the file names only by identifier); sum of these 1.48705e-7 kg
- refrigeration machine, R134a as refrigerant: 6.00749e-9 unit
- refrigeration machine, carbon dioxide, liquid as refrigerant: 6.6751e-10 unit
- reinforcing steel: 0.00554248 kg
- road vehicle factory: 5.82728e-15 unit
- sanitary ceramics: 4.77926e-5 kg
- scrap aluminium: -9.70757e-7, -4.55457e-8, -2.04402e-6 kg (3 suppliers, which the file names only by identifier); sum of these -3.06032e-6 kg
- scrap copper: -1.32845e-7, -2.83143e-6, -5.96184e-6 kg (3 suppliers, which the file names only by identifier); sum of these -8.92612e-6 kg
- scrap steel: -1.70495e-6, -0.00417919, -0.0013457 kg (3 suppliers, which the file names only by identifier); sum of these -0.00552659 kg
- section bar rolling, steel: 1.08803e-5 kg
- sheet rolling, aluminium: 1.00028e-6 kg
- sheet rolling, steel: 2.79015e-6 kg
- silica sand: 2.57905e-7 kg
- silicon carbide: 6.50724e-9 kg
- sodium hydroxide, without water, in 50% solution state: 1.45443e-8 kg
- sodium nitrite: 4.97207e-11, 2.44893e-11 kg (2 suppliers, which the file names only by identifier); sum of these 7.42099e-11 kg
- spent solvent mixture: -1.50615e-7, -9.82141e-10, -5.88507e-8 kg (3 suppliers, which the file names only by identifier); sum of these -2.10448e-7 kg
- steel, chromium steel 18/8, hot rolled: 3.3375e-8 kg
- steel, low-alloyed, hot rolled: 3.8169e-7 kg
- stone wool, packed: 6.675e-8 kg
- sulfuric acid: 1.65461e-7, 2.16458e-8 kg (2 suppliers, which the file names only by identifier); sum of these 1.87107e-7 kg
- synthetic rubber: 2.51032e-6 kg
- tap water: 0.00010947, 4.76394e-6, 1.88925e-7, 4.07086e-5, 3.52525e-7, 5.45162e-5, 1.23933e-7, 9.49675e-7 kg (8 suppliers, which the file names only by identifier); sum of these 0.000211074 kg
- tempering, flat glass: 8.57968e-8 kg
- tetraethyl orthosilicate: 1.64394e-7 kg
- textile, woven cotton: 1.13285e-8 kg
- thermoforming, with calendering: 1.59884e-8 kg
- titanium dioxide: 1.79043e-9, 3.58087e-9 kg (2 suppliers, which the file names only by identifier); sum of these 5.3713e-9 kg
- used lorry with refrigeration machine, 16 metric ton: -6.675e-9 unit
- used train, passenger, high-speed: -3.43187e-12 unit
- waste electric and electronic equipment: -7.03372e-5 kg
- waste emulsion paint: -1.07125e-9, -3.62173e-5, -3.41399e-6 kg (3 suppliers, which the file names only by identifier); sum of these -3.96323e-5 kg
- waste emulsion paint, separated: -1.03677e-10 kg
- waste mineral oil: -1.10401e-9, -1.16766e-7, -4.45955e-8 kg (3 suppliers, which the file names only by identifier); sum of these -1.62466e-7 kg
- waste mineral wool: -6.75632e-5, -3.16145e-7, -2.77058e-5 kg (3 suppliers, which the file names only by identifier); sum of these -9.55852e-5 kg
- waste paint on metal: -6.32249e-10, -5.36674e-12 kg (2 suppliers, which the file names only by identifier); sum of these -6.37616e-10 kg
- waste paper, unsorted: -7.83354e-6, -7.83354e-6 kg (2 suppliers, which the file names only by identifier); sum of these -1.56671e-5 kg
- waste paperboard, unsorted: -1.77158e-6, -1.77158e-6 kg (2 suppliers, which the file names only by identifier); sum of these -3.54317e-6 kg
- waste plastic, mixture: -7.50583e-6, -3.79284e-8, -8.36829e-8, -6.50517e-6, -5.25449e-5, -5.0151e-7, -1.967e-7, -2.07142e-7 kg (8 suppliers, which the file names only by identifier); sum of these -6.75829e-5 kg
- waste polyurethane foam: -1.44494e-7, -1.13339e-10 kg (2 suppliers, which the file names only by identifier); sum of these -1.44607e-7 kg
- waste x-ray film: -1.17415e-8 kg
- wastewater from lorry production: -7.00306e-11, -1.44815e-8 m3 (2 suppliers, which the file names only by identifier); sum of these -1.45515e-8 m3
- wastewater, average: -9.5047e-10, -3.02615e-10, -1.58163e-7, -3.78199e-8 m3 (4 suppliers, which the file names only by identifier); sum of these -1.97236e-7 m3
- water, deionised: 1.42107e-11, 3.94768e-9, 1.28154e-8 kg (3 suppliers, which the file names only by identifier); sum of these 1.67773e-8 kg
- wax, lost-wax casting: 8.93166e-8 kg
- welding, arc, steel: 0.0036227 m
- welding, gas, steel: 0.0274742 m
- white spirit: 1.22525e-7 kg
- wire drawing, copper: 2.0025e-7 kg
- zinc: 3.87645e-5 kg
- zircon: 5.54808e-8 kg

## Inputs from nature
- Water, well, in ground [natural resource, in water]: 4.63913e-7 m3

## Emissions to nature
- 2-Propanol [air, urban air close to ground]: 8.75749e-8 kg
- Ammonia [air, unspecified]: 1.48853e-10 kg
- Benzene [air, unspecified]: 8.74425e-11 kg
- Benzene, ethyl- [air, urban air close to ground]: 3.89266e-9 kg
- Cadmium II [air, unspecified]: 1.15478e-14 kg
- Carbon dioxide, fossil [air, unspecified]: 4.22528e-6 kg
- Carbon monoxide, fossil [air, unspecified]: 6.49478e-9 kg
- Chromium III [air, unspecified]: 1.95578e-12 kg
- Copper ion [air, unspecified]: 1.95578e-12 kg
- Dinitrogen monoxide [air, unspecified]: 1.48853e-10 kg
- Heptane [air, urban air close to ground]: 3.8083e-8 kg
- Lead II [air, unspecified]: 1.26825e-16 kg
- Mercury II [air, unspecified]: 2.30288e-17 kg
- Methane, fossil [air, unspecified]: 1.10138e-10 kg
- Methanol [air, urban air close to ground]: 4.0172e-9 kg
- NMVOC, non-methane volatile organic compounds [air, unspecified]: 3.36803e-5 kg
- Nickel II [air, unspecified]: 8.07675e-14 kg
- Nitrogen [air, unspecified]: 5.44691e-7 kg
- Nitrogen oxides [air, unspecified]: 4.005e-8 kg
- Particulate Matter, < 2.5 um [air, unspecified]: 1.69545e-9 kg
- Particulate Matter, > 10 um [air, unspecified]: 7.27575e-11 kg
- Particulate Matter, > 2.5 um and < 10um [air, unspecified]: 1.4151e-10 kg
- Propanol [air, urban air close to ground]: 3.99158e-8 kg
- Propylene oxide [air, urban air close to ground]: 7.3113e-9 kg
- Selenium IV [air, unspecified]: 1.15478e-14 kg
- Sulfur dioxide [air, unspecified]: 8.01e-10 kg
- Toluene [air, unspecified]: 3.67793e-11 kg
- Toluene [air, urban air close to ground]: 3.43872e-9 kg
- Water [air, unspecified]: 8.60074e-8 m3
- Water [air, urban air close to ground]: 1.05008e-8 m3
- Xylene [air, unspecified]: 3.67793e-11 kg
- Xylene [air, urban air close to ground]: 3.43872e-9 kg
- Zinc II [air, unspecified]: 1.15478e-12 kg
- Hydrocarbons, unspecified [soil, unspecified]: 7.39852e-7 kg
- BOD5, Biological Oxygen Demand [water, unspecified]: 8.4105e-10 kg
- COD, Chemical Oxygen Demand [water, unspecified]: 8.4105e-10 kg
- DOC, Dissolved Organic Carbon [water, unspecified]: 3.67793e-10 kg
- Hydrocarbons, unspecified [water, unspecified]: 7.39852e-7 kg
- TOC, Total Organic Carbon [water, unspecified]: 3.67793e-10 kg
- Water [water, unspecified]: 3.66691e-7 m3
