# excavation, skid-steer loader

Dataset: EcoSpold 2, unit process
Geography: RER
Time period: 1996-01-01 to 2022-12-31
Technology level: current
Classification: ISIC rev.4 ecoinvent: 4312:Site preparation
Classification: EcoSpold01Categories: construction processes/civil engineering
Synonyms: front-end; loader; engine; loading; shovel
Tags: ConvertedDataset
Scenario: Business-as-Usual
System model: Allocation at the point of substitution
Generated by: Daniel Kellenberger (obsolete)
Published in: Kellenberger D. 2007
Database: ecoinvent
isCopyrightProtected: true

## General comment
This module is based on the data included in the report Oekoinventare von Energiesystemen 1996. The diesel consumption and the emissions are updated using the Swiss "Offroad database" and applied to year 2000. This moduleshould not be used if its relative importance would be high in a certain environmental inventory.
[This dataset was already contained in the ecoinvent database version 2. It was not individually updated during the transfer to ecoinvent version 3. Life Cycle Impact Assessment results may still have changed, as they are affected by changes in the supply chain, i.e. in other datasets. This dataset was generated following the ecoinvent quality guidelines for version 2. It may have been subject to central changes described in the ecoinvent version 3 change report (http://www.ecoinvent.org/database/ecoinvent-version-3/reports-of-changes/), and the results of the central updates were reviewed extensively. The changes added e.g. consistent water flows and other information throughout the database. The documentation of this dataset can be found in the ecoinvent reports of version 2, which are still available via the ecoinvent website. The change report linked above covers all central changes that were made during the conversion process.]

## Included activities end
Includes the inputs "building machine" for infrastructure, lubricating oil and fuel consumption, and some measured air emissions as output.

## Geography
Certain elementary flows or intermediate product flows are extrapolated from Swiss conditions.

## Technology
Average current technology for one typical machine representing the category.

## Reference product
- excavation, skid-steer loader: 1 m3; By-product classification allocatable product; CPC 54330: Excavating and earthmoving services
  EcoSpold01Location=RER
  production volume 1.32237 m3
    This is a placeholder value that does not reflect real-world production volumes. This dataset does not currently require a real-world production volume to work in the database framework, and no actual data were collected yet. This has no negative effect on the results of the ecoinvent database. The placeholder value of this activity was scaled according to the nominal GDP of 2005 (source: United Nations, http://data.un.org/Glossary.aspx?q=GDP+%28current+US%24%29, accessed 20130726) to reflect an appropriate share of the global production volume, which is also a placeholder value.
  property price 5.95 EUR2005
    From '_66 Machinery and equipment n.e.c.' EU27' in EU & Dk IO database 2003.
  properties: carbon allocation 0 kg, carbon content 0

## Inputs from technosphere
- building machine: 9.09e-7 unit; lognormal variance with pedigree 0.0581, pedigree (1,5,5,3,1)
  EcoSpold01Location=RER
- diesel: 0.13 kg; lognormal variance with pedigree 0.0581, pedigree (1,5,5,3,1)
  EcoSpold01Location=RER
  properties: carbon content, fossil 0.865, dry mass 1 kg, heating value, net 42.8 MJ, wet mass 1 kg
  note on carbon content, fossil: C-content of diesel is 86.5% (ecoinvent v2.2 report 6_IV, Tab 3.14)
- lubricating oil: 0.003 kg; lognormal variance with pedigree 0.0581, pedigree (1,5,5,3,1)
  EcoSpold01Location=RER
  properties: carbon content, fossil 0.75, dry mass 1 kg, heating value, net 40.2 MJ, wet mass 1 kg
  note on carbon content, fossil: Lubricating oil is produced from diesel. C-content/dry mass of fats and oils considered 75%, from: ecoinvent v2.2 report, n 15a, pg 40
  note on heating value, net: Literature value, Source: IPCC 2006, 2006 IPCC Guidelines for National Greenhouse Gas Inventories, Prepared by the National Greenhouse Gas Inventories Programme, Eggleston H.S., Buendia L., Miwa K., Ngara T. and Tanabe K. (eds). Published: IGES, Japan
- waste mineral oil: -7.24739e-5, -0.00292753 kg (2 suppliers, which the file names only by identifier); sum of these -0.003 kg; lognormal variance with pedigree 0.0583, pedigree (1,5,2,3,1)
  EcoSpold01Location=CH
  production volume
    Calculated from the production volume of excavation, skid-steer loader in proportion to the respective output amounts.
  properties: carbon content, fossil 0.864444, dry mass 0.9 kg, heating value, net 34.7 MJ, water content 0.111111, wet mass 1 kg
  note on carbon content, fossil: Tab A.6, ecoinvent v2.2 report 13_I. C content has been calculated after data in the tables, and then referred to 1 kg DM
  note on heating value, net: Value taken from the general comment of the treatment dataset.

## Emissions to nature
- Ammonia [air, unspecified]: 2.61e-6 kg; lognormal variance with pedigree 0.0981, pedigree (1,5,5,3,1)
- Benzo(a)pyrene [air, unspecified]: 3.91e-9 kg; lognormal variance with pedigree 0.3581, pedigree (1,5,5,3,1)
- Cadmium II [air, unspecified]: 1.3e-9 kg; lognormal variance with pedigree 0.6981, pedigree (1,5,5,3,1)
- Carbon dioxide, fossil [air, unspecified]: 0.408 kg; lognormal variance with pedigree 0.0581, pedigree (1,5,5,3,1)
- Carbon monoxide, fossil [air, unspecified]: 0.00148 kg; lognormal variance with pedigree 0.6981, pedigree (1,5,5,3,1)
- Chromium III [air, unspecified]: 6.52e-9 kg; lognormal variance with pedigree 0.6981, pedigree (1,5,5,3,1)
- Copper ion [air, unspecified]: 2.22e-7 kg; lognormal variance with pedigree 0.6981, pedigree (1,5,5,3,1)
- Dinitrogen monoxide [air, unspecified]: 1.57e-5 kg; lognormal variance with pedigree 0.0981, pedigree (1,5,5,3,1)
- Dioxins, measured as 2,3,7,8-tetrachlorodibenzo-p-dioxin [air, unspecified]: 7.84e-15 kg; lognormal variance with pedigree 0.0981, pedigree (1,5,5,3,1)
- Methane, fossil [air, unspecified]: 2.09e-5 kg; lognormal variance with pedigree 0.0981, pedigree (1,5,5,3,1)
- NMVOC, non-methane volatile organic compounds [air, unspecified]: 0.000676 kg; lognormal variance with pedigree 0.0981, pedigree (1,5,5,3,1)
- Nickel II [air, unspecified]: 9.13e-9 kg; lognormal variance with pedigree 0.6981, pedigree (1,5,5,3,1)
- Nitrogen oxides [air, unspecified]: 0.00576 kg; lognormal variance with pedigree 0.0981, pedigree (1,5,5,3,1)
- PAH, polycyclic aromatic hydrocarbons [air, unspecified]: 4.39e-7 kg; lognormal variance with pedigree 0.3581, pedigree (1,5,5,3,1)
- Particulate Matter, < 2.5 um [air, unspecified]: 0.000526 kg; lognormal variance with pedigree 0.3581, pedigree (1,5,5,3,1)
- Particulate Matter, > 10 um [air, unspecified]: 3.51e-5 kg; lognormal variance with pedigree 0.0981, pedigree (1,5,5,3,1)
- Particulate Matter, > 2.5 um and < 10um [air, unspecified]: 2.34e-5 kg; lognormal variance with pedigree 0.1781, pedigree (1,5,5,3,1)
- Selenium IV [air, unspecified]: 1.3e-9 kg; lognormal variance with pedigree 0.6981, pedigree (1,5,5,3,1)
- Sulfur dioxide [air, unspecified]: 0.000132 kg; lognormal variance with pedigree 0.0581, pedigree (1,5,5,3,1)
- Zinc II [air, unspecified]: 1.3e-7 kg; lognormal variance with pedigree 0.6981, pedigree (1,5,5,3,1)

## Sampling procedure
Some data from the LCA study Oekoinventare von Energiesystemen 1996 and emissions from the Swiss "Offroad" database.

## Extrapolations
See geography

## Review by Roberto Dones 2005-07-19
Passed
