# treatment of waste textile, soiled, municipal incineration

Dataset: EcoSpold 2, unit process
Geography: CH
Time period: 1994-01-01 to 2022-12-31
Technology level: outdated
Classification: ISIC rev.4 ecoinvent: 3821:Treatment and disposal of non-hazardous waste
Classification: EcoSpold01Categories: waste management/municipal incineration
Synonyms: 95% textiles soiled with 5% waste oil
Tags: Treatment; ConvertedDataset
Scenario: Business-as-Usual
System model: Allocation at the point of substitution
Generated by: Gabor Doka (obsolete)
Published in: Doka G. 2007
Database: ecoinvent
isCopyrightProtected: true

## General comment
Inventoried waste contains 100% soiled textiles; .
waste composition (wet, in ppm): upper heating value 19.78 MJ/kg; lower heating value 14.45 MJ/kg; H2O 229680; O 287940; H 49839; C 345150; S 14523; N 70864; P 37.5; B n.a.; Cl 1791.3; Br n.a.; F n.a.; I n.a.; Ag n.a.; As 0.06; Ba n.a.; Cd 0.04; Co n.a.; Cr 0.56; Cu 44.639; Hg 0.00006; Mn n.a.; Mo n.a.; Ni 0.16; Pb 25.603; Sb n.a.; Se n.a.; Sn n.a.; V n.a.; Zn 105.08; Be n.a.; Sc n.a.; Sr n.a.; Ti n.a.; Tl 0.03; W n.a.; Si n.a.; Fe n.a.; Ca n.a.; Al n.a.; K n.a.; Mg n.a.; Na n.a.;
Share of carbon in waste that is biogenic 100%.
Share of iron in waste that is metallic/recyclable 0%.
Net energy produced in MSWI: 1.36MJ/kg waste electric energy and 2.86MJ/kg waste thermal energy
Allocation of energy production: no substitution or expansion. Total burden allocated to waste disposal function of MSWI.
One kg of this waste produces 0.0261 kg of slag and 0.01494 kg of residues, which are landfilled. Additional solidification with 0.005975 kg of cement.
[This dataset was already contained in the ecoinvent database version 2. It was not individually updated during the transfer to ecoinvent version 3. Life Cycle Impact Assessment results may still have changed, as they are affected by changes in the supply chain, i.e. in other datasets. This dataset was generated following the ecoinvent quality guidelines for version 2. It may have been subject to central changes described in the ecoinvent version 3 change report (http://www.ecoinvent.org/database/ecoinvent-version-3/reports-of-changes/), and the results of the central updates were reviewed extensively. The changes added e.g. consistent water flows and other information throughout the database. The documentation of this dataset can be found in the ecoinvent reports of version 2, which are still available via the ecoinvent website. The change report linked above covers all central changes that were made during the conversion process.]

## Included activities end
waste-specific air and water emisions from incineration, auxiliary material consumption for flue gas cleaning. Short-term emissions to river water and long-term emisisons to ground water from slag compartment (from bottom slag) and residual material landfill (from solidified fly ashes and scrubber slugde). Process energy demands for MSWI.

## Geography
Specific to the technology mix encountered in Switzerland in 2000. Well applicable to modern incineration practices in Europe, North America or Japan.

## Technology
replaced by newer incineration technology with fly ash extraction. Average Swiss MSWI plants in 2000 with electrostatic precipitator for fly ash (ESP), wet flue gas scrubber and 29.4% SNCR , 32.2% SCR-high dust , 24.6% SCR-low dust -DeNOx facilities and 13.8% without Denox (by burnt waste, according to Swiss average). Share of waste incinerated in plants with magnetic scrap separation from slag : 50%. Gross electric efficiency technology mix 12.997% and Gross thermal efficiency technology mix 25.57%

## Time period
Waste composition as given in literature reference, theoretical data or other source. Transfer coefficients for modern Swiss MSWI. Emission speciation based on early 90ies data.

## Parameters
- fraction, process water, to air: 1 dimensionless; name fraction_PW_to_air; lognormal variance with pedigree 0.092025, pedigree (4,4,3,2,4)
  Calculated value. During incineration all water incorporated in the products entering the incinerator evaporate to air.

## Reference product
- waste textile, soiled: -1 kg; name RP_amount_1; By-product classification Waste; CPC 39270: Waste, parings and scrap of plastics
  EcoSpold01Location=CH
  production volume 0 kg
    outdated. Replaced by newer incineration technology with fly ash extraction.
  property carbon content, non-fossil 0.570519
    C content of 1 kg DM was calculated after data in Tab A.4, ecoinvent v2.2 report 13_I,
  property heating value, net 14.45 MJ
    Value taken from the general comment of the treatment dataset.
  property price 0 EUR2005
    Waste products are assigned a price of zero as they are assumed to require further treatment.
  properties: carbon allocation 0.42789 kg, carbon content 0.570519, carbon content, fossil 0, dry mass 0.75 kg, water content 0.333333, water in wet mass 0.25 kg, wet mass 1 kg

## Inputs from technosphere
- ammonia, anhydrous, liquid: 0.00358 kg; lognormal variance with pedigree 1.11, pedigree (1,1,5,1,1)
  uncertainty calculated from uncertainty in average DeNOx input, uncertainty in the share of thermal NOx, uncertainty of nitrogen content in average municipal waste and the unertainty in nitrogen content in *this* waste.
  EcoSpold01Location=CH
  properties: dry mass 1 kg, wet mass 1 kg
- cement, unspecified: 0.00598 kg; lognormal variance with pedigree 0.1, pedigree (1,1,5,1,1)
  EcoSpold01Location=CH
  Cement for solidification of landfilled residual material. Uncertainty calculated from unertainty of the waste composition of this waste, of transfer coefficients in the incinerator and of the solidification recipe.
  properties: dry mass 1 kg, wet mass 1 kg
- chemical, inorganic: 1.32e-5 kg; lognormal variance with pedigree 0.23, pedigree (1,1,5,1,1)
  EcoSpold01Location=GLO
  Proxy for Polyelectrolyte. uncertainty calculated from uncertainty in average auxiliary material input, and the unertainty of the waste composition of this waste
  properties: carbon content, fossil 0.003, dry mass 1 kg, wet mass 1 kg
  note on carbon content, fossil: This dataset is an unweighted average of 20 inorganic substances (listed in Tab 88.1, ecoinvent v2.2 report 8, part II), being part of the top100 chemicals included in this database. The C-content has also been calculated as an unweighted average of the C content of the substances composing this dataset.
- chemical, organic: 1.59e-7 kg; lognormal variance with pedigree 1.97, pedigree (1,1,5,1,1)
  EcoSpold01Location=GLO
  Proxy for TMT15. uncertainty calculated from uncertainty in average auxiliary material input, and the unertainty of the waste composition of this waste
  properties: carbon content, fossil 0.628, dry mass 1 kg, heating value, net 19.03 MJ, wet mass 1 kg
  note on carbon content, fossil: This dataset is an unweighted average of 20 organic substances (listed in Tab 88.1, ecoinvent v2.2 report 8, part II), being part of the top100 chemicals included in this database. The C-content has also been calculated as an unweighted average of the C content of the substances composing this dataset.
- chromium oxide, flakes: 2.09e-6 kg; lognormal variance with pedigree 1.82, pedigree (1,1,5,1,1)
  Proxy for vanadium pentoxide V2O5 in SCR catalyst, uncertainty calculated from uncertainty in average DeNOx input, uncertainty in the share of thermal NOx, uncertainty of nitrogen content in average municipal waste and the unertainty in nitrogen content in *this* waste.
  EcoSpold01Location=RER
  properties: dry mass 1 kg, wet mass 1 kg
- heat, district or industrial, natural gas: 0.3141 MJ; lognormal variance with pedigree 1.11, pedigree (1,1,5,1,1)
  uncertainty calculated from uncertainty in average DeNOx input, uncertainty in the share of thermal NOx, uncertainty of nitrogen content in average municipal waste and the unertainty in nitrogen content in *this* waste.
  EcoSpold01Location=RER
  properties: heating value, net 1 MJ
- hydrochloric acid, without water, in 30% solution state: 7.91e-6 kg; lognormal variance with pedigree 0.23, pedigree (1,1,5,1,1)
  EcoSpold01Location=RER
  uncertainty calculated from uncertainty in average auxiliary material input, and the unertainty of the waste composition of this waste
  properties: dry mass 1 kg, heating value, net 3.32 MJ, wet mass 1 kg
- iron (III) chloride, without water, in 40% solution state: 1.26e-5 kg; lognormal variance with pedigree 0.84, pedigree (1,1,5,1,1)
  EcoSpold01Location=CH
  uncertainty calculated from uncertainty in average auxiliary material input, and the unertainty of the waste composition of this waste
  properties: dry mass 1 kg, wet mass 1 kg
- municipal waste incineration facility: 2.5e-10 unit; lognormal variance with pedigree 0.04, pedigree (1,1,5,1,1)
  EcoSpold01Location=CH
  demands per kilogram waste. uncertainty is heeded in the module
- process-specific burdens, municipal waste incineration: 1 kg; lognormal variance with pedigree 0.04, pedigree (1,1,5,1,1)
  EcoSpold01Location=CH
  demands per kilogram waste. uncertainty is heeded in the module;activityLink introduced to establish a direct link to the corresponding regional supply of this product
- process-specific burdens, residual material landfill: 0.0149 kg; lognormal variance with pedigree 0.09, pedigree (1,1,5,1,1)
  EcoSpold01Location=CH
  uncertainty is calculated from uncertainties in waste composition and transfer coefficients in incinerator;activityLink introduced to establish a direct link to the corresponding regional supply of this product
- process-specific burdens, slag landfill: 0.0261 kg; lognormal variance with pedigree 0.1, pedigree (1,1,5,1,1)
  (same comment as for process-specific burdens, residual material landfill)
- quicklime, milled, packed: 0.000343 kg; lognormal variance with pedigree 0.55, pedigree (1,1,5,1,1)
  (same comment as for iron (III) chloride, without water, in 40% solution state)
  properties: dry mass 0.99 kg, water content 0.010101, wet mass 1 kg
- residual material landfill: 3.11e-11 unit; lognormal variance with pedigree 0.09, pedigree (1,1,5,1,1)
  uncertainty is calculated from uncertainties in waste composition and transfer coefficients in incinerator
  EcoSpold01Location=CH
- slag landfill: 4.64e-11 unit; lognormal variance with pedigree 0.1, pedigree (1,1,5,1,1)
  (same comment as for residual material landfill)
- sodium hydroxide, without water, in 50% solution state: 0.00724 kg; lognormal variance with pedigree 0.19, pedigree (1,1,5,1,1)
  uncertainty calculated from uncertainty in average auxiliary material input, and the unertainty of the waste composition of this waste
  EcoSpold01Location=RER
  properties: dry mass 1 kg, heating value, net 3.03 MJ, wet mass 1 kg
- titanium dioxide: 0.000102 kg; lognormal variance with pedigree 1.82, pedigree (1,1,5,1,1)
  EcoSpold01Location=RER
  uncertainty calculated from uncertainty in average DeNOx input, uncertainty in the share of thermal NOx, uncertainty of nitrogen content in average municipal waste and the unertainty in nitrogen content in *this* waste.
  properties: dry mass 1 kg, wet mass 1 kg
- waste cement, hydrated: -0.0149 kg; name BP_amount_1; lognormal variance with pedigree 0.06, pedigree (1,1,1,1,1)
  EcoSpold01Location=CH
  Hydrated cement for solidification of landfilled residual material. Uncertainty calculated from unertainty of the waste composition of this waste and transfer coefficients in the incinerator and of the solidification recipe.
  production volume
    Calculated from the production volume of waste textile, soiled, 25% water in proportion to the respective output amounts.
  properties: dry mass 1 kg, wet mass 1 kg

## Emissions to nature
- Ammonia [air, urban air close to ground]: 5.61e-5 kg; lognormal variance with pedigree 1.22, pedigree (1,1,5,1,1)
  uncertainty calculated from uncertainty in average N-emissions, uncertainty in the share of thermal NOx, uncertainty of nitrogen content in average municipal waste and the unertainty in nitrogen content in *this* waste.
- Arsenic ion [air, urban air close to ground]: 6.12e-16 kg; lognormal variance with pedigree 2.08, pedigree (1,1,5,1,1)
  uncertainty is calculated from uncertainties in waste composition and transfer coefficients in incinerator
- Cadmium II [air, urban air close to ground]: 2.2e-12 kg; lognormal variance with pedigree 2, pedigree (1,1,5,1,1)
  (same comment as for Arsenic ion)
- Carbon dioxide, non-fossil [air, urban air close to ground]: 1.25 kg; lognormal variance with pedigree 0.07, pedigree (1,1,5,1,1)
  (same comment as for Arsenic ion)
- Carbon monoxide, non-fossil [air, urban air close to ground]: 0.000223 kg; lognormal variance with pedigree 0.690625, pedigree (1,3,5,2,1)
  Literature data from switzerland and germany adapted to plant age distribution in switzerland
  Uncertainty: & basic uncertainty of 5; literature data from switzerland and germany adapted to plant age distribution in switzerland
- Chromium III [air, urban air close to ground]: 4.14e-14 kg; lognormal variance with pedigree 1.78, pedigree (1,1,5,1,1)
  (same comment as for Arsenic ion)
- Copper ion [air, urban air close to ground]: 3.3e-10 kg; lognormal variance with pedigree 1.17, pedigree (1,1,5,1,1)
  (same comment as for Arsenic ion)
- Cyanide [air, urban air close to ground]: 6.38e-5 kg; lognormal variance with pedigree 1.22, pedigree (1,1,5,1,1)
  (same comment as for Ammonia)
- Dinitrogen monoxide [air, urban air close to ground]: 0.000299 kg; lognormal variance with pedigree 1.22, pedigree (1,1,5,1,1)
  (same comment as for Ammonia)
- Hydrochloric acid [air, urban air close to ground]: 1.99e-8 kg; lognormal variance with pedigree 0.67, pedigree (1,1,5,1,1)
  (same comment as for Arsenic ion)
- Lead II [air, urban air close to ground]: 9.5e-10 kg; lognormal variance with pedigree 1.22, pedigree (1,1,5,1,1)
  (same comment as for Arsenic ion)
- Mercury II [air, urban air close to ground]: 2.07e-18 kg; lognormal variance with pedigree 2.06, pedigree (1,1,5,1,1)
  (same comment as for Arsenic ion)
- Methane, non-fossil [air, urban air close to ground]: 6.38e-6 kg; lognormal variance with pedigree 0.091225, pedigree (2,3,5,2,1)
  Confidential data from 5 plants in Switzerland and Germany
  Uncertainty: & basic uncertainty of 1.5; confidential data from 5 plants in Switzerland and Germany
- Nickel II [air, urban air close to ground]: 6.91e-15 kg; lognormal variance with pedigree 1.94, pedigree (1,1,5,1,1)
  (same comment as for Arsenic ion)
- Nitrogen oxides [air, urban air close to ground]: 0.00225 kg; lognormal variance with pedigree 1.22, pedigree (1,1,5,1,1)
  (same comment as for Ammonia)
- Phosphorus [air, urban air close to ground]: 3.75e-8 kg; lognormal variance with pedigree 1.15, pedigree (1,1,5,1,1)
  (same comment as for Arsenic ion)
- Sulfur dioxide [air, urban air close to ground]: 6.19e-5 kg; lognormal variance with pedigree 0.38, pedigree (1,1,5,1,1)
  (same comment as for Arsenic ion)
- Thallium I [air, urban air close to ground]: 3e-11 kg; lognormal variance with pedigree 1.98, pedigree (1,1,5,1,1)
  (same comment as for Arsenic ion)
- Water [air, unspecified]: 0.00025 m3; name water_to_air_unspecified; lognormal variance with pedigree 0.0807, pedigree (2,2,5,1,1)
  Calculated value based on water balance.
  property carbon content, fossil 0; name C_content_fossil
  property carbon content, non-fossil 0; name C_content_non_fossil
  property fraction, origin: fresh water 0; name fraction_origin_fresh_water
  property fraction, origin: salt water 0; name fraction_origin_salt_water
  property fraction, origin: unspecified 1; name fraction_origin_unspecified
  property water in wet mass 1000 kg; name WWM
- Zinc II [air, urban air close to ground]: 1.72e-9 kg; lognormal variance with pedigree 1.04, pedigree (1,1,5,1,1)
  (same comment as for Arsenic ion)
- Arsenic ion [water, ground-, long-term]: 3.3e-8 kg; lognormal variance with pedigree 1.96, pedigree (1,1,5,1,1)
  Long-term emissions from landfilling of incineration residues. uncertainty is calculated from uncertainties in waste composition and transfer coefficients in incinerator and landfills.
- Arsenic ion [water, surface water]: 2.7e-8 kg; lognormal variance with pedigree 1.69, pedigree (1,1,5,1,1)
  uncertainty is calculated from uncertainties in waste composition and transfer coefficients in incinerator and landfills
- BOD5, Biological Oxygen Demand [water, ground-, long-term]: 0.00279 kg; lognormal variance with pedigree 0.07, pedigree (1,1,5,1,1)
  (same comment as for Arsenic ion)
- BOD5, Biological Oxygen Demand [water, surface water]: 1.29e-5 kg; lognormal variance with pedigree 0.17, pedigree (1,1,5,1,1)
  (same comment as for Arsenic ion)
- COD, Chemical Oxygen Demand [water, ground-, long-term]: 0.00852 kg; lognormal variance with pedigree 0.07, pedigree (1,1,5,1,1)
  (same comment as for Arsenic ion)
- COD, Chemical Oxygen Demand [water, surface water]: 2.31e-5 kg; lognormal variance with pedigree 0.3, pedigree (1,1,5,1,1)
  (same comment as for Arsenic ion)
- Cadmium II [water, ground-, long-term]: 4.01e-10 kg; lognormal variance with pedigree 7.63, pedigree (1,1,5,1,1)
  (same comment as for Arsenic ion)
- Cadmium II [water, surface water]: 1.81e-11 kg; lognormal variance with pedigree 1.92, pedigree (1,1,5,1,1)
  (same comment as for Arsenic ion)
- Chloride [water, ground-, long-term]: 4.23e-5 kg; lognormal variance with pedigree 0.31, pedigree (1,1,5,1,1)
  (same comment as for Arsenic ion)
- Chloride [water, surface water]: 0.00175 kg; lognormal variance with pedigree 0.56, pedigree (1,1,5,1,1)
  (same comment as for Arsenic ion)
- Chromium III [water, surface water]: 1.78e-9 kg; lognormal variance with pedigree 1.69, pedigree (1,1,5,1,1)
  (same comment as for Arsenic ion)
- Chromium VI [water, ground-, long-term]: 5.93e-8 kg; lognormal variance with pedigree 1.87, pedigree (1,1,5,1,1)
  (same comment as for Arsenic ion)
- Chromium VI [water, surface water]: 1.82e-8 kg; lognormal variance with pedigree 1.57, pedigree (1,1,5,1,1)
  (same comment as for Arsenic ion)
- Copper ion [water, ground-, long-term]: 3.61e-5 kg; lognormal variance with pedigree 1.08, pedigree (1,1,5,1,1)
  (same comment as for Arsenic ion)
- Copper ion [water, surface water]: 1.81e-9 kg; lognormal variance with pedigree 1.72, pedigree (1,1,5,1,1)
  (same comment as for Arsenic ion)
- DOC, Dissolved Organic Carbon [water, ground-, long-term]: 0.00337 kg; lognormal variance with pedigree 0.07, pedigree (1,1,5,1,1)
  (same comment as for Arsenic ion)
- DOC, Dissolved Organic Carbon [water, surface water]: 9.46e-6 kg; lognormal variance with pedigree 0.29, pedigree (1,1,5,1,1)
  (same comment as for Arsenic ion)
- Lead II [water, ground-, long-term]: 1.82e-6 kg; lognormal variance with pedigree 7.23, pedigree (1,1,5,1,1)
  (same comment as for Arsenic ion)
- Lead II [water, surface water]: 7.13e-10 kg; lognormal variance with pedigree 1.19, pedigree (1,1,5,1,1)
  (same comment as for Arsenic ion)
- Mercury II [water, ground-, long-term]: 3.12e-12 kg; lognormal variance with pedigree 3.69, pedigree (1,1,5,1,1)
  (same comment as for Arsenic ion)
- Mercury II [water, surface water]: 6.42e-13 kg; lognormal variance with pedigree 1.93, pedigree (1,1,5,1,1)
  (same comment as for Arsenic ion)
- Nickel II [water, ground-, long-term]: 1.5e-7 kg; lognormal variance with pedigree 1.79, pedigree (1,1,5,1,1)
  (same comment as for Arsenic ion)
- Nickel II [water, surface water]: 1e-10 kg; lognormal variance with pedigree 2.41, pedigree (1,1,5,1,1)
  (same comment as for Arsenic ion)
- Nitrate [water, ground-, long-term]: 0.00255 kg; lognormal variance with pedigree 0.2, pedigree (1,1,5,1,1)
  (same comment as for Arsenic ion)
- Nitrate [water, surface water]: 0.000906 kg; lognormal variance with pedigree 0.17, pedigree (1,1,5,1,1)
  (same comment as for Arsenic ion)
- Phosphate [water, ground-, long-term]: 4.39e-6 kg; lognormal variance with pedigree 5.36, pedigree (1,1,5,1,1)
  (same comment as for Arsenic ion)
- Phosphate [water, surface water]: 7.33e-9 kg; lognormal variance with pedigree 1.37, pedigree (1,1,5,1,1)
  (same comment as for Arsenic ion)
- Sulfate [water, ground-, long-term]: 0.0364 kg; lognormal variance with pedigree 0.21, pedigree (1,1,5,1,1)
  (same comment as for Arsenic ion)
- Sulfate [water, surface water]: 0.00705 kg; lognormal variance with pedigree 0.18, pedigree (1,1,5,1,1)
  (same comment as for Arsenic ion)
- TOC, Total Organic Carbon [water, ground-, long-term]: 0.00337 kg; lognormal variance with pedigree 0.07, pedigree (1,1,5,1,1)
  (same comment as for Arsenic ion)
- TOC, Total Organic Carbon [water, surface water]: 9.46e-6 kg; lognormal variance with pedigree 0.29, pedigree (1,1,5,1,1)
  (same comment as for Arsenic ion)
- Thallium I [water, ground-, long-term]: 1.75e-8 kg; lognormal variance with pedigree 1.51, pedigree (1,1,5,1,1)
  (same comment as for Arsenic ion)
- Thallium I [water, surface water]: 1.84e-11 kg; lognormal variance with pedigree 2.12, pedigree (1,1,5,1,1)
  (same comment as for Arsenic ion)
- Zinc II [water, ground-, long-term]: 1.63e-6 kg; lognormal variance with pedigree 5.58, pedigree (1,1,5,1,1)
  (same comment as for Arsenic ion)
- Zinc II [water, surface water]: 1.93e-8 kg; lognormal variance with pedigree 0.89, pedigree (1,1,5,1,1)
  (same comment as for Arsenic ion)

## Sampling procedure
waste-specific calculation based on literature data

## Extrapolations
Typical elemental transfer coefficients from current studies for modern MSWI, completed with data from coal power plants and estimates, adapted for inert/burnable waste.

## Review by Niels Jungbluth 2003-07-15
Passed. Calculation for standard deviation 95 of, i.e., infrastructure,
land occupation, transport services or other services can differ from
standard Pedigree approach used in this project and figures obtained by
this procedure.
