# limestone quarry construction

Dataset: EcoSpold 2, unit process
Geography: RoW
Time period: 2000-01-01 to 2022-12-31
Technology level: current
Classification: ISIC rev.4 ecoinvent: 4290:Construction of other civil engineering projects
Classification: EcoSpold01Categories: construction materials/additives
Synonyms: Steinbruch; quarry
Tags: ConvertedDataset
Scenario: Business-as-Usual
System model: Allocation at the point of substitution
Generated by: Daniel Kellenberger (obsolete)
Published in: Kellenberger D. 2007
Database: ecoinvent
isCopyrightProtected: true

## General comment
Data are estimated from air-picture. The mine has an annual yield of about 380'000 t
[This dataset was already contained in the ecoinvent database version 2. It was not individually updated during the transfer to ecoinvent version 3. Life Cycle Impact Assessment results may still have changed, as they are affected by changes in the supply chain, i.e. in other datasets. This dataset was generated following the ecoinvent quality guidelines for version 2. It may have been subject to central changes described in the ecoinvent version 3 change report (http://www.ecoinvent.org/database/ecoinvent-version-3/reports-of-changes/), and the results of the central updates were reviewed extensively. The changes added e.g. consistent water flows and other information throughout the database. The documentation of this dataset can be found in the ecoinvent reports of version 2, which are still available via the ecoinvent website. The change report linked above covers all central changes that were made during the conversion process.]

## Included activities end
Includes the "land-use" of the built part of the mine and therefore the production places and the paved roads

## Geography
data are from only one company in Switzerland (KFN), for some exchanges RER-modules have been used as proxy

## Technology
Medium size Swiss limestone mine

## Reference product
- limestone quarry infrastructure: 1 unit; By-product classification allocatable product; CPC 53269: Other constructions for manufacturing
  EcoSpold01Location=CH
  production volume 3.96633 unit
    This is a placeholder value that does not reflect real-world production volumes. This dataset does not currently require a real-world production volume to work in the database framework, and no actual data were collected yet. This has no negative effect on the results of the ecoinvent database.
  property price 122109 EUR2005
    Calculated based on inputs: The price of the product has been calculated as a sum of the values of the material and energy inputs for this product. This value is therefore a rough estimation. It may underestimate the real price since there are additional expenses when producing any product. These expences can include for example labour costs, treatment of waste materials and profit for the producer. Please consider carefully whether this level of data quality is acceptable for your application.
  properties: carbon allocation 0 kg, carbon content 0

## Inputs from technosphere
- building, hall: 500 m2; lognormal variance with pedigree 0.3701, pedigree (4,2,5,5,1)
  EcoSpold01Location=CH
- building, multi-storey: 480 m3; lognormal variance with pedigree 0.3701, pedigree (4,2,5,5,1)
  EcoSpold01Location=RER

## Inputs from nature
- Occupation, industrial area [natural resource, land]: 29000 m2*year; lognormal variance with pedigree 0.1001, pedigree (4,2,5,5,1)
- Occupation, traffic area, road network [natural resource, land]: 20000 m2*year; lognormal variance with pedigree 0.1001, pedigree (4,2,5,5,1)
  Uncertainty: ;
- Transformation, from forest, unspecified [natural resource, land]: 980 m2; = transformation_to_traffic_area+transformation_to_industrial_area; lognormal variance with pedigree 0.1901, pedigree (4,2,5,5,1)
- Transformation, to industrial area [natural resource, land]: 580 m2; name transformation_to_industrial_area; lognormal variance with pedigree 0.1901, pedigree (4,2,5,5,1)
- Transformation, to traffic area, road network [natural resource, land]: 400 m2; name transformation_to_traffic_area; lognormal variance with pedigree 0.1901, pedigree (4,2,5,5,1)

## Sampling procedure
survey

## Extrapolations
data which are only available for RER have been used as proxy for CH This dataset has been copied from an original dataset covering the geography CH. The uncertainty has been adjusted accordingly.

## Review by Roberto Dones 2004-07-01
Passed

## Review by Emilia Moreno Ruiz 2012-03-05
corrected land use balance

## Review by Bo Weidema 2012-03-05
correction for land use
