# tissue paper production

Dataset: EcoSpold 2, unit process
Geography: RoW
Time period: 2000-01-01 to 2022-12-31
Technology level: current
Classification: ISIC rev.4 ecoinvent: 1701:Manufacture of pulp, paper and paperboard
Classification: EcoSpold01Categories: paper & cardboard/graphic paper
Scenario: Business-as-Usual
System model: Allocation at the point of substitution
Generated by: Tereza Levova
Published in: Hischier R. 2007
Database: ecoinvent
isCopyrightProtected: true

## General comment
This dataset is a copy of the European dataset. It represents tissue paper production. Tissue paper is a hygienic paper which is used in end products such as toilet tissue, kitchen rolls, facial tissues, napkins and hand towels.

Main sources for this dataset are questionnaire from a European producer, information from the environmental report of another producer (Steinbeis Temming (2002)) and the German inventory study about graphical paper (Tiedemann et al. (2000)). Further source is the European IPPC documentation for the paper and pulp industry (European Commission (2000)).

Reference:

Steinbeis Temming (2002) Umweltbilanz. Download of May 2, 2002 from http://www.steinbeis-temming.de/site/oekologieumweltbilanz.xml.

Tiedemann A., Böttcher Tiedemann C., Buschardt A., Georgi B., Giersberg G., Goosmann G., Gregor H.-D., Mehlhorn B., Modi A., Neitzel H., Oels H.-J., Schmitz S. and Suhr M. (2000) Ökobilanzen für graphische Papiere. Texte 22/00. Umweltbundesamt, Berlin

## Included activities start
This activity starts with the reception of the raw materials, such as waste paper.

## Included activities end
This module includes the European recycling paper production with deinking - including deinking of waste paper, paper production, energy production on-site, internal waste water treatment.

## Geography
Data from two European producers used as European average data.

## Technology
Average of present used technology

## Time period
Data represent the average technology in the early 2000s. The production volume is valid for 2014.

## Parameters
- fraction, process water, to air: 0.046 dimensionless; name fraction_PW_to_air; lognormal variance with pedigree 0.092025, pedigree (4,4,3,2,4)
  Literature value (Statistics Canada, 2007 & Shaffer, K.H., 2008, Consumptive water use in the Great Lakes Basin, USGS) (Vionnet, S., Quantis Water Database - Technical Report, 2012).

## Reference product
- tissue paper: 1 kg; name tissue_paper_byP; By-product classification allocatable product; CPC 321: Pulp, paper and paperboard
  EcoSpold01Location=RER
  production volume 7.5e9 kg
    Calculated based on literature data and estimates.
    Out of the world's estimated production of 21 million tons of tissue, Europe produces approximately 6 million tons (European Tissue Symposium, http://www.europeantissue.com/about/profile-of-ets/, accessed 20140603). The principal grades produced by ETS members are toilet tissue, household towels, facial tissue, hankies and industrial towels and wipes.
    About half of all raw material needs is provided by waste paper (European Tissue Symposium, http://www.europeantissue.com/sustainability/production/, accessed 20140603).
  property carbon content, fossil 2.22e-5
    Fossil C content was calculated after fossil C contents of chemicals used in the production of the paper (in Tab 8.86 ecoinvent v2.2 report 11_III, part 8).
  property carbon content, non-fossil 0.49
    Biogenic C content was calculated after biogenic C contents of chemicals used in the production of the paper (in Tab 8.86 ecoinvent v2.2 report 11_III, part 8). The cellulose content in 1 kg of paper (on a wet mas basis) was estimated as (1-chemical content), C content of cellulose was considered 0.44 kgC/kg dry mass (ecoinvent v2.2 report, n 15a, pg 40)
  property heating value, net 10.22 MJ
    LHV is calculated based on the Carbon content of the product. More details can be found on the respective documentation.
  property price 1.34 EUR2005
    Calculated based on literature values. The price of 1 kg of tissue paper is calculated to be 1.34 euro/kg. This price is calculated as a weighted average of prices calculated based on import (net trade) of this material from the world into 5 big economies; EU, Japan, China, India, USA. The net weight and the trade value is obtained from the UN Comtrade database (average of commodity no. 730830 Doors, windows, frames of iron or steel and commodity no. 481820 Paper hankerchiefs, cleansing, facial tissues, towel), year 2005.
  properties: carbon allocation 0.463071 kg, carbon content 0.490022, dry mass 0.945 kg, water content 0.0582011, water in wet mass 0.055 kg, wet mass 1 kg

## Inputs from technosphere
- acrylic dispersion, with water, in 58% solution state: 2.73391e-9, 0.000115974 kg (2 suppliers, which the file names only by identifier); sum of these 0.000115977 kg
- acrylic varnish, with water, in 53% solution state: 3.81058e-5, 8.98283e-10 kg (2 suppliers, which the file names only by identifier); sum of these 3.81067e-5 kg
- aluminium scrap, post-consumer: -0.00242674 kg
- aluminium, wrought alloy: 0.00242674 kg
- chemical, inorganic: 3.64369e-6 kg
- chemical, organic: 3.64369e-6 kg
- chimney: 9.26961e-9 m
- copper scrap, sorted, pressed: -0.00027737 kg
- copper, cathode: 0.000308188 kg
- corrugated board box: 0.00255951, 0.00594088, 2.02631e-7, 9.53418e-5 kg (4 suppliers, which the file names only by identifier); sum of these 0.00859593 kg
- diesel, burned in agricultural machinery: 0.000937079 MJ
- diesel, low-sulfur: 7.37213e-9, 1.77672e-7, 9.23551e-8, 3.33878e-9, 4.93597e-10, 1.48797e-8, 7.44232e-9 kg (7 suppliers, which the file names only by identifier); sum of these 3.03554e-7 kg
- electricity, low voltage: 0.00198342, 0.00393068, 0.0377584, 0.000673553, 0.0134947, 0.000122488, 1.65183e-6, 0.009354, 0.00275452 kWh (9 suppliers, which the file names only by identifier); sum of these 0.0700734 kWh
- electricity, medium voltage: 0.000166638, 5.19965e-5, 0.00196247, 1.54846e-6, 7.90086e-6, 0.000477072, 2.60952e-5 kWh (7 suppliers, which the file names only by identifier); sum of these 0.00269372 kWh
- ethylene glycol monoethyl ether: 5.10676e-5, 1.20384e-9 kg (2 suppliers, which the file names only by identifier); sum of these 5.10688e-5 kg
- ethylene vinyl acetate copolymer: 2.0133e-5, 8.80395e-6 kg (2 suppliers, which the file names only by identifier); sum of these 2.89369e-5 kg
- extrusion, plastic film: 0.000171259 kg
- hazardous waste, for incineration: -1.68989e-5, -7.20149e-6, -1.88242e-7 kg (3 suppliers, which the file names only by identifier); sum of these -2.42886e-5 kg
- heat, district or industrial, natural gas: 0.00116053, 0.0410369, 0.111194, 0.00182721, 3.62989e-6 MJ (5 suppliers, which the file names only by identifier); sum of these 0.155223 MJ
- heavy fuel oil: 2.29956e-6, 1.93498e-8, 9.83705e-8, 1.27553e-7, 2.48229e-8, 3.32291e-8, 1.13822e-6 kg (7 suppliers, which the file names only by identifier); sum of these 3.7411e-6 kg
- industrial furnace, 1MW, oil: 6.9523e-10 unit
- industrial furnace, natural gas: 3.87093e-9 unit
- industrial machine, heavy, unspecified: 2.12457e-5, 5.00833e-10 kg (2 suppliers, which the file names only by identifier); sum of these 2.12462e-5 kg
- isopropanol: 0.000212457, 5.00833e-9 kg (2 suppliers, which the file names only by identifier); sum of these 0.000212462 kg
- kraft paper: 0.00390811, 0.00182334 kg (2 suppliers, which the file names only by identifier); sum of these 0.00573146 kg
- lead: 0.000514444 kg
- light fuel oil: 1.18805e-6, 1.17923e-7, 1.13385e-8, 6.08704e-7, 8.42636e-9, 7.82523e-9, 5.84287e-8 kg (7 suppliers, which the file names only by identifier); sum of these 2.00069e-6 kg
- lubricating oil: 1.43962e-6, 8.33206e-6 kg (2 suppliers, which the file names only by identifier); sum of these 9.77168e-6 kg
- maintenance, transmission network, electricity, high voltage direct current land cable: 1.47653e-8, 8.54571e-8 km*year (2 suppliers, which the file names only by identifier); sum of these 1.00222e-7 km*year
- maintenance, transmission network, electricity, high voltage direct current subsea cable: 7.21949e-7, 4.73118e-8 km*year (2 suppliers, which the file names only by identifier); sum of these 7.6926e-7 km*year
- maize starch: 5.37549e-5 kg
- municipal solid waste: -3.16183e-7, -9.80085e-5, -1.13853e-7, -0.000223617, -7.96701e-8 kg (5 suppliers, which the file names only by identifier); sum of these -0.000322135 kg
- natural gas, high pressure: 2.03221e-7, 8.578e-8, 4.91286e-7, 1.45795e-7, 8.24773e-6, 8.42984e-7, 9.20186e-8, 2.71534e-9, 3.26744e-7, 3.4312e-7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 m3 (26 suppliers, which the file names only by identifier); sum of these 3.54481e-5 m3
- oil storage, 3000l: 8.69023e-9 unit
- packaging box factory: 8.43642e-12 unit
- packaging film, low density polyethylene: 0.000141732 kg
- paper, woodfree, coated: 0.135466, 3.19339e-6 kg (2 suppliers, which the file names only by identifier); sum of these 0.135469 kg
- polyethylene, high density, granulate: 0.000173765 kg
- polyethylene, low density, granulate: 6.51446e-6 kg
- polypropylene, granulate: 6.25024e-5 kg
- potato starch: 3.69919e-5 kg
- printing ink, offset, without solvent, in 47.5% solution state: 1.96056e-5, 0.000948214 kg (2 suppliers, which the file names only by identifier); sum of these 0.00096782 kg
- sand: 8.93772e-6, 4.64005e-8, 0.00341828, 0.000581629 kg (4 suppliers, which the file names only by identifier); sum of these 0.0040089 kg
- scrap copper: -1.28204e-6, -2.73252e-5, -2.21155e-6 kg (3 suppliers, which the file names only by identifier); sum of these -3.08188e-5 kg
- scrap steel: -8.13094e-8, -4.28894e-6, -6.41766e-5 kg (3 suppliers, which the file names only by identifier); sum of these -6.85468e-5 kg
- sheet rolling, aluminium: 5.72052e-8, 0.00242669 kg (2 suppliers, which the file names only by identifier); sum of these 0.00242674 kg
- spent solvent mixture: -0.000105114, -3.4461e-9, -4.10718e-5 kg (3 suppliers, which the file names only by identifier); sum of these -0.000146189 kg
- steel, low-alloyed: 0.000685468 kg
- synthetic rubber: 1.74453e-5 kg
- textile, woven cotton: 2.74836e-5 kg
- thermoforming, with calendering: 3.8788e-5, 9.14365e-10 kg (2 suppliers, which the file names only by identifier); sum of these 3.87889e-5 kg
- waste emulsion paint: -6.47867e-10, -2.51155e-5, -2.36749e-6 kg (3 suppliers, which the file names only by identifier); sum of these -2.74836e-5 kg
- waste mineral oil: -2.01286e-7, -1.43962e-6, -8.13078e-6 kg (3 suppliers, which the file names only by identifier); sum of these -9.77168e-6 kg
- waste paper, unsorted: -7.09789e-5, -0.0190632, -0.0190743 kg (3 suppliers, which the file names only by identifier); sum of these -0.0382084 kg
- waste paperboard, unsorted: -2.02631e-7, -0.00429787, -0.00429787 kg (3 suppliers, which the file names only by identifier); sum of these -0.00859593 kg
- waste plastic, mixture: -9.06691e-7, -4.58169e-9, -1.01087e-8, -3.22637e-6, -6.34734e-6, -6.05816e-8, -2.37611e-8, -2.50224e-8 kg (8 suppliers, which the file names only by identifier); sum of these -1.06045e-5 kg
- waste wire plastic: -6.63495e-5, -5.17297e-6 kg (2 suppliers, which the file names only by identifier); sum of these -7.15224e-5 kg
- white spirit: 0.000297252 kg
- wire drawing, copper: 0.000286073, 2.21155e-5 kg (2 suppliers, which the file names only by identifier); sum of these 0.000308188 kg
- zinc coat, coils: 1.01975e-5, 6.68279e-7 m2 (2 suppliers, which the file names only by identifier); sum of these 1.08658e-5 m2

## Inputs from nature
- Occupation, construction site [natural resource, land]: 9.52113e-8 m2*year
- Occupation, seabed, infrastructure [natural resource, land]: 8.46187e-5 m2*year
- Transformation, from seabed, unspecified [natural resource, land]: 2.11547e-6 m2
- Transformation, to seabed, infrastructure [natural resource, land]: 2.11547e-6 m2
- Water, unspecified natural origin [natural resource, in water]: 4.2992e-6 m3

## Emissions to nature
- 2-Propanol [air, urban air close to ground]: 0.000212462 kg
- Acetaldehyde [air, urban air close to ground]: 2.41663e-11 kg
- Acetic acid [air, urban air close to ground]: 2.98507e-10 kg
- Acetone [air, urban air close to ground]: 2.27838e-11 kg
- Ammonia [air, urban air close to ground]: 1.62771e-11 kg
- Arsenic ion [air, urban air close to ground]: 1.9746e-12 kg
- Benzene [air, urban air close to ground]: 5.54466e-10 kg
- Benzene, ethyl- [air, urban air close to ground]: 9.44383e-6 kg
- Benzo(a)pyrene [air, urban air close to ground]: 2.08326e-14 kg
- Butane [air, urban air close to ground]: 9.98725e-10 kg
- Calcium [air, urban air close to ground]: 1.67081e-11 kg
- Carbon dioxide, fossil [air, urban air close to ground]: 9.66988e-5 kg
- Carbon monoxide, fossil [air, urban air close to ground]: 4.36e-9 kg
- Chromium III [air, urban air close to ground]: 7.51864e-13 kg
- Chromium VI [air, urban air close to ground]: 7.59458e-15 kg
- Cobalt II [air, urban air close to ground]: 5.01243e-12 kg
- Copper ion [air, urban air close to ground]: 7.13017e-11 kg
- Dinitrogen monoxide [air, urban air close to ground]: 3.18794e-10 kg
- Dioxins, measured as 2,3,7,8-tetrachlorodibenzo-p-dioxin [air, urban air close to ground]: 1.541e-19 kg
- Ethanol [air, urban air close to ground]: 4.55676e-11 kg
- Formaldehyde [air, urban air close to ground]: 2.95148e-10 kg
- Heptane [air, urban air close to ground]: 9.23917e-5 kg
- Hydrocarbons, aliphatic, alkanes, unspecified [air, urban air close to ground]: 1.38362e-10 kg
- Hydrocarbons, aliphatic, unsaturated [air, urban air close to ground]: 4.55676e-12 kg
- Hydrocarbons, aromatic [air, urban air close to ground]: 2.57479e-11 kg
- Hydrochloric acid [air, urban air close to ground]: 2.27973e-10 kg
- Hydrogen fluoride [air, urban air close to ground]: 8.17633e-12 kg
- Iron ion [air, urban air close to ground]: 1.24552e-10 kg
- Lead II [air, urban air close to ground]: 2.20244e-11 kg
- Mercury II [air, urban air close to ground]: 1.13452e-13 kg
- Methane, fossil [air, urban air close to ground]: 3.31902e-9 kg
- Methanol [air, urban air close to ground]: 9.74603e-6 kg
- Molybdenum VI [air, urban air close to ground]: 1.21514e-12 kg
- Nickel II [air, urban air close to ground]: 7.44269e-11 kg
- Nitrogen oxides [air, urban air close to ground]: 4.48549e-8 kg
- PAH, polycyclic aromatic hydrocarbons [air, urban air close to ground]: 1.39699e-11 kg
- Particulate Matter, < 2.5 um [air, urban air close to ground]: 1.56223e-9 kg
- Particulate Matter, > 10 um [air, urban air close to ground]: 3.64541e-10 kg
- Particulate Matter, > 2.5 um and < 10um [air, urban air close to ground]: 1.82271e-10 kg
- Pentane [air, urban air close to ground]: 1.67963e-9 kg
- Propane [air, urban air close to ground]: 2.8303e-10 kg
- Propionic acid [air, urban air close to ground]: 2.76495e-11 kg
- Propylene oxide [air, urban air close to ground]: 1.77376e-5 kg
- Selenium IV [air, urban air close to ground]: 1.82271e-12 kg
- Sodium [air, urban air close to ground]: 1.13919e-10 kg
- Sulfur dioxide [air, urban air close to ground]: 6.52143e-8 kg
- Toluene [air, urban air close to ground]: 8.34282e-6 kg
- Vanadium V [air, urban air close to ground]: 1.51892e-10 kg
- Water [air, non-urban air or from high stacks]: 2.56298e-6 m3
- Xylene [air, urban air close to ground]: 8.34254e-6 kg
- Zinc II [air, urban air close to ground]: 7.72255e-11 kg
- BOD5, Biological Oxygen Demand [water, surface water]: 3.02846e-8 kg
- COD, Chemical Oxygen Demand [water, unspecified]: 2.42716e-6 kg
- DOC, Dissolved Organic Carbon [water, unspecified]: 8.98947e-7 kg
- TOC, Total Organic Carbon [water, unspecified]: 8.98947e-7 kg
- Water [water, unspecified]: 1.73621e-6 m3

## Sampling procedure
Based on literature (see dataset field “Published Source”)

## Extrapolations
This dataset is extrapolated from the european dataset. The production volume as well as uncertainty has been adjusted accordingly.
