# maintenance, polymer electrolyte membrane fuel cell 2kW electrical

Dataset: EcoSpold 2, unit process
Geography: CH
Time period: 2000-01-01 to 2022-12-31
Technology level: current
Classification: EcoSpold01Categories: natural gas/cogeneration
Classification: ISIC rev.4 ecoinvent: 3314:Repair of electrical equipment
Synonyms: proton exchange membrane fuel cell; PEFC; PEMFC; polymer electrolyte fuel cell; Membran Brennstoffzelle; Polymer Elektrolyt Membran Brennstoffzelle
Tags: ConvertedDataset
Scenario: Business-as-Usual
System model: Allocation at the point of substitution
Generated by: Alex Primas
Published in: Primas A. 2007
Database: ecoinvent
isCopyrightProtected: true

## General comment
The module reflects the maintenance for a polymer electrolyte membrane (PEM) fuel cell with 2 kW electrical output. Inventory based on information from literature for future production based on manufacturer data. Maintenance is carried out every year or 5'300 h. Every fourth year (21'000 h) reformer catalyst stack replacement and every sixth year (32'000 h) stack replacement is carried out.
[This dataset was already contained in the ecoinvent database version 2. It was not individually updated during the transfer to ecoinvent version 3. Life Cycle Impact Assessment results may still have changed, as they are affected by changes in the supply chain, i.e. in other datasets. This dataset was generated following the ecoinvent quality guidelines for version 2. It may have been subject to central changes described in the ecoinvent version 3 change report (http://www.ecoinvent.org/database/ecoinvent-version-3/reports-of-changes/), and the results of the central updates were reviewed extensively. The changes added e.g. consistent water flows and other information throughout the database. The documentation of this dataset can be found in the ecoinvent reports of version 2, which are still available via the ecoinvent website. The change report linked above covers all central changes that were made during the conversion process.]

## Included activities end
The module includes an estimation for materials and transport used for the maintenance of the PEM fuel cell unit.

## Geography
Process applicable in central European conditions.

## Technology
polymer electrolyte membrane (PEM) fuel cell for stationary cogeneration. Performance, stack lifetime and catalyst use according to expected future values for a serial product. Operation with connection to low pressure gas network. Electrical efficiency 32%, total efficiency 87%.

## Reference product
- maintenance, polymer electrolyte membrane fuel cell, 2kW electrical: 1 unit; By-product classification allocatable product; CPC 87152: Maintenance and repair services of electrical machinery and apparatus n.e.c.
  EcoSpold01Location=CH
  production volume 0.0336675 unit
    This is a placeholder value that does not reflect real-world production volumes. This dataset does not currently require a real-world production volume to work in the database framework, and no actual data were collected yet. This has no negative effect on the results of the ecoinvent database. The placeholder value of this activity was scaled according to the nominal GDP of 2005 (source: United Nations, http://data.un.org/Glossary.aspx?q=GDP+%28current+US%24%29, accessed 20130726) to reflect an appropriate share of the global production volume, which is also a placeholder value.
  property price 51.1542 EUR2005
    Calculated based on inputs: The price of the product has been calculated as a sum of the values of the material and energy inputs for this product. This value is therefore a rough estimation. It may underestimate the real price since there are additional expenses when producing any product. These expences can include for example labour costs, treatment of waste materials and profit for the producer. Please consider carefully whether this level of data quality is acceptable for your application.
  properties: carbon allocation 0 kg, carbon content 0

## Inputs from technosphere
- charcoal: 0.125 kg; lognormal variance with pedigree 0.068, pedigree (4,5,5,5,1)
  EcoSpold01Location=GLO
  Estimate based on expected lifetime of desulfuring unit
  Uncertainty: estimate based on expected lifetime of desulfuring unit
  properties: carbon content, non-fossil 0.8, dry mass 1 kg, heating value, net 28.4 MJ, wet mass 1 kg
  note on heating value, net: Indicative value. Reference: Fuels - Higher and Lower Calorific Values, available at: https://www.engineeringtoolbox.com/fuels-higher-calorific-values-d_169.html
- fuel cell, stack polymer electrolyte membrane, 2kW electrical, future: 0.167 unit; lognormal variance with pedigree 0.368, pedigree (4,5,5,5,1)
  EcoSpold01Location=CH
  Estimate based on expected stack lifetime in future
  Uncertainty: estimate based on expected stack lifetime in future
- platinum: 0.000375 kg; lognormal variance with pedigree 0.068, pedigree (4,5,5,5,1)
  Estimate based on expected lifetime of reformer catalyst
  EcoSpold01Location=RER
  Uncertainty: estimate based on expected lifetime of reformer catalyst
  properties: dry mass 1 kg, wet mass 1 kg
- steel, chromium steel 18/8, hot rolled: 1.2 kg; lognormal variance with pedigree 0.068, pedigree (4,5,5,5,1)
  EcoSpold01Location=RER
  Estimate
  Uncertainty: estimate
  properties: carbon content, fossil 0.0008, dry mass 1 kg, wet mass 1 kg
  note on carbon content, fossil: Stainless steel model is the grade 304 steel (18/8 stainless, 18% chromium 8% nickel; max. 0.08% C)
- titanium dioxide: 0.035 kg; lognormal variance with pedigree 0.068, pedigree (4,5,5,5,1)
  EcoSpold01Location=RER
  Estimate based on expected lifetime of reformer catalyst
  Uncertainty: estimate based on expected lifetime of reformer catalyst
  properties: dry mass 1 kg, wet mass 1 kg
- transport, passenger car: 200 km; lognormal variance with pedigree 0.188, pedigree (4,5,5,5,1)
  Estimated
  EcoSpold01Location=CH
  Uncertainty: estimated

## Sampling procedure
Literature data and manufacturer information

## Review by Rolf Frischknecht 2007-08-13
passed
none
