# treatment of sewage sludge, 75% water, WWT, WW from vegetable oil refinery, sanitary landfill

Dataset: EcoSpold 2, unit process
Geography: GLO
Time period: 1994-01-01 to 2022-12-31
Technology level: current
Classification: ISIC rev.4 ecoinvent: 3821:Treatment and disposal of non-hazardous waste
Scenario: Business-as-Usual
System model: Allocation at the point of substitution
Generated by: Nikolia Stoikou
Database: ecoinvent
isCopyrightProtected: true

## General comment
The process represents the treatment of a waste (sewage sludge) that is exclusively generated from another waste treatment. Sewage sludge is generated in the wastewater treatment of 'wastewater from vegetable oil refinery'. Recommended use of this dataset: to be used within the specific chain of treatments for 'wastewater from vegetable oil refinery'. Share of biogenic carbon in the sludge: 98.956%. Landfill gas capture and utilisation generates 0.03321 kWh of electricity and 0.0599 MJ of useful heat. 0.002598 kg waste mass remains in the landfill even after the long term period.

## Included activities start
The activity starts with the waste being available at the gate of the treatment facility. Collection and transportation of the waste to the treatment plant is not included.

## Included activities end
The activity ends with the waste being treated and waste-specific emissions from the landfill are released to the environment (air due to landfil gas and water due to landfil leachate).

## Geography
Landfill site with mean annual temperature (MAT) of 16.743579766537 degC, mean annual precipitation (MAP) of 1250.84108527132 mm/year, and net infiltration of 790.252035689178 mm/year.The leachate percolating through the landfill has an average residence time of 6.33 years.
References: UN data, 2020. Precipitation, Environment Statistics Database, United Nations Statistics Division Available at: http://data.un.org/Data.aspx?q=precipitation&d=ENV&f=variableID%3a6;
World Bank, 2022. Surface area (sq.km), World Bank Group Available at: https://data.worldbank.org/indicator/AG.SRF.TOTL.K2;
Doka G.,2021. A model for composition-specific life cycle inventories of regionalised wastewater fates, Zurich, Switzerland. http://www.doka.ch/publications.htm

## Technology
Sanitary (controlled) landfill for municipal solid waste. Ultimate average landfill height is 20 meters. Operation phase duration is 30 years. The total raw landfill gas mass produced in the landfill from this waste is 0.138 kg. The total CH4 mass in the raw landfill gas is 0.07233 kg. Percentage of landfill gas directly emitted is 47w%. Percentage of landfill gas captured and flared is 18.02w%. Percentage of landfill gas captured and utilised is 34.98%. Conversion efficiencies are 27.8e% for electricity and 13.5e% for useful heat. Leachate generated during the first 100 years is collected and treated region-specifically before emission. Based on average waste composition and climate data the end of carbonate phase is estimated to be reached 2'863 years after waste deposition.

## Reference product
- heat, district or industrial, other than natural gas: 1 MJ; By-product classification allocatable product; CPC 17300: Steam and hot water; lognormal variance with pedigree 0.11311, pedigree (1,1,1,1,1)
  Net production of heat from landfill gas utilisation.
  Uncertainty: Uncertainty calculated depending on waste input and uncertainty of transfer coefficients in landfill to landfill gas, uncertainty in gas capture and utilisation.
  production volume 3.02088e9 MJ
    Calculated from the production volume of the reference product in proportion to the respective output amounts.
  property corresponding fuel use, propane, furnace >100kW 0 MJ; name fuel_use
    Lower heating value of the fuel input related to the heat/electricity output, taken directly from ecoinvent v3.0 dataset "heat production, natural gas, at industrial furnace >100kW, GLO 2000".
  property price 0.0106 EUR2005
    Average European district heat price from Ecoheatcool and Euroheat 2005-2006, Ecoheat Work package 1: The European heat market. Final report. 10.6 EUR/GJ i s the price of district heat. http://www.solarthermalworld.org/files/Ecoheatcool%20WP1%20Web.pdf?download
  properties: carbon allocation 0 kg, carbon content 0, carbon content, fossil 0, carbon content, non-fossil 0, dry mass 1 kg, heating value, net 1 MJ, water content 0, water in wet mass 0 kg, wet mass 1 kg

## Inputs from technosphere
- air compressor, screw-type compressor, 300kW: 1.28798e-9 unit
- air compressor, screw-type compressor, 4kW: 1.20574e-10 unit
- alkyd paint, white, without solvent, in 60% solution state: 9.07527e-10, 6.91599e-9 kg (2 suppliers, which the file names only by identifier); sum of these 7.82351e-9 kg
- aluminium, primary, ingot: 3.06805e-9, 4.76771e-9, 8.65703e-10, 5.02673e-10 kg (4 suppliers, which the file names only by identifier); sum of these 9.20413e-9 kg
- building, hall, steel construction: 1.47062e-6 m2
- carton board box production, with offset printing: 4.16276e-5 kg
- chlorine, liquid: 2.64805e-8, 3.31056e-9 kg (2 suppliers, which the file names only by identifier); sum of these 2.97911e-8 kg
- chromium steel pipe: 2.00808e-6 kg
- concrete, normal strength: 7.67012e-10, 3.46613e-12, 2.59573e-12, 3.82989e-11, 3.99069e-12, 3.23075e-11, 1.3701e-9, 7.69574e-11, 6.30765e-12 m3 (9 suppliers, which the file names only by identifier); sum of these 2.30103e-9 m3
- copper scrap, sorted, pressed: -5.29331e-6 kg
- copper, cathode: 5.29331e-6 kg
- cottonseed oil, crude: 0.000557678 kg
- drawing of pipe, steel: 2.00808e-6 kg
- electricity, medium voltage: 3.31414e-5, 2.98862e-5, 5.43364e-9, 1.13001e-6, 4.17234e-7, 6.44577e-8, 3.17427e-7, 7.47564e-8, 2.56091e-6, 3.67642e-8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 kWh (35 suppliers, which the file names only by identifier); sum of these 0.000228915 kWh
- extrusion of plastic sheets and thermoforming, inline: 1.84984e-7 kg
- extrusion, plastic film: 7.55968e-6 kg
- fish canning plant: 4.72121e-14, 5.22439e-13 unit (2 suppliers, which the file names only by identifier); sum of these 5.69651e-13 unit
- gas boiler: 2.41148e-11 unit
- generator, 200kW electrical: 6.41859e-10 unit
- glass fibre reinforced plastic, polyamide, injection moulded: 1.63373e-7 kg
- glass wool mat: 3.18577e-6 kg
- heat, district or industrial, natural gas: 0.000657847, 3.43037e-5 MJ (2 suppliers, which the file names only by identifier); sum of these 0.000692151 MJ
- heat, district or industrial, other than natural gas: 0.000202087, 0.00167487 MJ (2 suppliers, which the file names only by identifier); sum of these 0.00187696 MJ
- industrial furnace, 1MW, oil: 9.5171e-10 unit
- industrial furnace, natural gas: 6.34068e-10 unit
- lubricating oil: 1.77244e-7, 2.32572e-8 kg (2 suppliers, which the file names only by identifier); sum of these 2.00501e-7 kg
- metal working, average for chromium steel product manufacturing: 1.92194e-5 kg
- methyl ethyl ketone: 1.12846e-9, 2.52165e-10 kg (2 suppliers, which the file names only by identifier); sum of these 1.38062e-9 kg
- operation, reefer, freezing: 4.76357e-5 kg*day
- palm oil, crude: 0.00774013 kg
- polyethylene, high density, granulate: 1.84984e-7 kg
- polyethylene, low density, granulate: 7.55968e-6 kg
- polymer foaming: 4.13787e-8 kg
- propane, burned in building machine: 1.07585e-6 MJ
- pump, 40W: 1.25797e-9 unit
- scrap steel: -6.16754e-10, -2.51149e-6, -4.86797e-7 kg (3 suppliers, which the file names only by identifier); sum of these -2.99891e-6 kg
- scrap tin sheet: -3.73395e-6, -0.000278938 kg (2 suppliers, which the file names only by identifier); sum of these -0.000282671 kg
- sheet rolling, aluminium: 9.20413e-9 kg
- soap: 3.32931e-7 kg
- sodium chloride, powder: 7.84664e-6 kg
- sodium hydroxide, without water, in 50% solution state: 2.68184e-5 kg
- solvent, organic: 4.74638e-6 kg
- soybean oil, crude: 0.00322078, 0.000549367 kg (2 suppliers, which the file names only by identifier); sum of these 0.00377015 kg
- spent solvent mixture: -3.84364e-6, -2.06972e-8, -8.8342e-7 kg (3 suppliers, which the file names only by identifier); sum of these -4.74776e-6 kg
- steel, chromium steel 18/8: 9.90822e-7 kg
- steel, low-alloyed: 1.08609e-7 kg
- tap water: 1.57783e-5, 1.71718, 0.000657538, 0.000420658, 0.00561876, 4.86568e-5, 0.0970668, 0.00454172, 0.00211454 kg (9 suppliers, which the file names only by identifier); sum of these 1.82766 kg
- tin plated chromium steel sheet, 2 mm: 1.812e-5 m2
- used insulation spiral-seam duct rockwool, DN 400: -3.16789e-6, -1.78759e-8 m (2 suppliers, which the file names only by identifier); sum of these -3.18577e-6 m
- vegetable oil refinery: 1.30685e-12 unit
- vegetable oil, refined: 0.000171135 kg
- waste aluminium: -9.20413e-9 kg
- waste concrete: -9.2647e-10, -5.48962e-6, -2.6204e-7 kg (3 suppliers, which the file names only by identifier); sum of these -5.75258e-6 kg
- waste mineral oil: -9.08275e-10, -1.62904e-7, -3.66891e-8 kg (3 suppliers, which the file names only by identifier); sum of these -2.00501e-7 kg
- waste paint on wall: -7.82351e-9 kg
- waste plastic, mixture: -1.21111e-8, -6.11996e-11, -5.44589e-8, -1.04964e-8, -8.47841e-8, -8.09215e-10, -3.17387e-10, -3.34235e-10 kg (8 suppliers, which the file names only by identifier); sum of these -1.63373e-7 kg
- waste polyethylene, for recycling, unsorted: -1.71561e-6, -2.59785e-6, -1.71561e-6, -1.71561e-6 kg (4 suppliers, which the file names only by identifier); sum of these -7.74466e-6 kg
- wastewater from vegetable oil refinery: -0.00123639 m3
- water, completely softened: 0.0247174, 0.034389, 0.0594149 kg (3 suppliers, which the file names only by identifier); sum of these 0.118521 kg
- wire drawing, copper: 3.28522e-6 kg

## Emissions to nature
- Water [air, non-urban air or from high stacks]: 0.000662379 m3
- BOD5, Biological Oxygen Demand [water, unspecified]: 4.80958e-8 kg
- COD, Chemical Oxygen Demand [water, unspecified]: 2.99674e-7 kg
- DOC, Dissolved Organic Carbon [water, unspecified]: 7.64601e-8 kg
- Nitrogen [water, unspecified]: 2.90578e-8 kg
- Phosphorus [water, unspecified]: 5.95446e-9 kg
- TOC, Total Organic Carbon [water, unspecified]: 7.64601e-8 kg
