# mine construction, gold and silver

Dataset: EcoSpold 2, unit process
Geography: PG
Time period: 2000-01-01 to 2022-12-31
Technology level: current
Classification: ISIC rev.4 ecoinvent: 4290:Construction of other civil engineering projects
Classification: EcoSpold01Categories: metals/extraction
Tags: ConvertedDataset
Scenario: Business-as-Usual
System model: Allocation at the point of substitution
Generated by: Matthias Tuchschmid (obsolete)
Published in: Classen M. 2009
Database: ecoinvent
isCopyrightProtected: true

## General comment
This dataset describes the production of 1 unit of gold-silver mine infrastructure. It includes land use and buildings and machinery consumption, as in open pit mining. Data was taken from the environmental report of Placer Dome Inc. and and Barrick for the Misima Mine and the Porgera Mine, respectively - both open pit mines -.
[This dataset was already contained in the ecoinvent database version 2. It was not individually updated during the transfer to ecoinvent version 3. Life Cycle Impact Assessment results may still have changed, as they are affected by changes in the supply chain, i.e. in other datasets. This dataset was generated following the ecoinvent quality guidelines for version 2. It may have been subject to central changes described in the ecoinvent version 3 change report (http://www.ecoinvent.org/database/ecoinvent-version-3/reports-of-changes/), and the results of the central updates were reviewed extensively. The changes added e.g. consistent water flows and other information throughout the database. The documentation of this dataset can be found in the ecoinvent reports of version 2, which are still available via the ecoinvent website. The change report linked above covers all central changes that were made during the conversion process.]

## Included activities start
From unoccupied land foreseen for a gold-silver mine.

## Included activities end
This activity ends with the transformation of occupied land, in time.

The dataset includes land transformation and occupation during the different stages of the mine, as well as the consumption of buildings and machinery for open pit mining.

## Geography
Land use of Papua New Guinea-plant, other inputs based on rough assumptions.

## Technology
The mine is foreseen to have a lifetime of 50 years.

## Time period
Period of public environmental report

## Reference product
- mine infrastructure, gold and silver: 1 unit; By-product classification allocatable product; CPC 53261: Mining constructions
  EcoSpold01Location=PG
  production volume 0.02 unit
    11.3 Mill. t ore per year
    Input to the combined gold-silver production dataset
  property price 3.38664e7 EUR2005
    Calculated based on inputs: The price of the product has been calculated as a sum of the values of the material and energy inputs for this product. This value is therefore a rough estimation. It may underestimate the real price since there are additional expenses when producing any product. These expences can include for example labour costs, treatment of waste materials and profit for the producer. Please consider carefully whether this level of data quality is acceptable for your application.
  properties: carbon allocation 0 kg, carbon content 0

## Inputs from technosphere
- building, hall: 15000 m2; source Classen M. 2009; lognormal variance with pedigree 0.318, pedigree (4,5,5,5,5)
  EcoSpold01Location=CH
  Estimation: As of this exchange, mine construction process represents that of open pit mining, and is assumed to be equivalent o the one depicted in the ecoinvent generic dataset (v2) "non-ferrous metal, mine, surface", in Part XIV of cited source.
  Uncertainty: Rough estimates
- building, multi-storey: 275000 m3; source Classen M. 2009; lognormal variance with pedigree 0.318, pedigree (4,5,5,5,5)
  EcoSpold01Location=RER
  Estimation: As of this exchange, mine construction process represents that of open pit mining, and is assumed to be equivalent o the one depicted in the ecoinvent generic dataset (v2) "non-ferrous metal, mine, surface", in Part XIV of cited source.
  Uncertainty: Rough estimates
- conveyor belt: 6000 m; source Classen M. 2009; lognormal variance with pedigree 0.318, pedigree (4,5,5,5,5)
  Estimation: As of this exchange, mine construction process represents that of open pit mining, and is assumed to be equivalent o the one depicted in the ecoinvent generic dataset (v2) "non-ferrous metal, mine, surface", in Part XIV of cited source.
  EcoSpold01Location=RER
  Uncertainty: Rough estimates
- industrial machine, heavy, unspecified: 650000 kg; source Classen M. 2009; lognormal variance with pedigree 0.318, pedigree (4,5,5,5,5)
  (same comment as for conveyor belt)

## Inputs from nature
All rows: source Placer Dome Inc. 2002
- Occupation, mineral extraction site [natural resource, land]: 5.87e8 m2*year; lognormal variance with pedigree 0.0806, pedigree (1,3,5,1,1)
  Calculated value: The entire area of the mine is not in active use at one time; "disturbed area in active use" values reported in literature are assumed to be the average share of the mine area in use along 50 years of operation.
  The ammount reported in this dataset was obtained as follows:
  1. Total disturbed area in active use (along 50 years) was obtained by adding corresponding values for all mines considered in the country (see sources). This amount equals 1.17E07 m2.
  2. The occupation of the mine was then calculated as:
  Ocupation, mineral extraction site = (Total disturbed area in active use) * 50 years = 1.17E07 m2 * 50 years = 5.85E08 m2y
  Further references:
  Barrick (2006b) Environment: Performance Tables from
  <http://www.barrick.com/Default.aspx?SectionID=8906c4bd-4ee4-4f15-bf1b-565e357c01e1&LanguageId=1>
  Uncertainty: Environmental report, Placer Dome Inc. 2003
- Transformation, from mineral extraction site [natural resource, land]: 2.321e7 m2; lognormal variance with pedigree 0.1606, pedigree (1,3,5,1,1)
  Calculated value: The ammount reported in this dataset was obtained by
  adding corresponding values for all mines considered in the country (see sources).
  Further references:
  Barrick (2006b) Environment: Performance Tables from
  <http://www.barrick.com/Default.aspx?SectionID=8906c4bd-4ee4-4f15-bf1b-565e357c01e1&LanguageId=1>
  Uncertainty: Environmental report, Placer Dome Inc. 2003
- Transformation, from unspecified [natural resource, land]: 2.321e7 m2; lognormal variance with pedigree 0.1606, pedigree (1,3,5,1,1)
  Estimation: "Transformation, from unspecified" stands for the area disturbed during lifetime of mine.
  Calculated value: The ammount reported in this dataset was obtained by
  adding corresponding values for all mines considered in the country (see sources). This amount equals 2.32E07 m2.
  Further references:
  Barrick (2006b) Environment: Performance Tables from
  <http://www.barrick.com/Default.aspx?SectionID=8906c4bd-4ee4-4f15-bf1b-565e357c01e1&LanguageId=1>
  Uncertainty: Environmental report, Placer Dome Inc. 2003
- Transformation, to heterogeneous, agricultural [natural resource, land]: 9.56e6 m2; lognormal variance with pedigree 0.1606, pedigree (1,3,5,1,1)
  Estimation: "Transformation, to heterogeneous, agricultural" stands for the area that is revegetated.
  Calculated value: The ammount reported in this dataset was obtained by
  adding corresponding values for all mines considered in the country (see sources). This amount equals 9.56E06 m2.
  Further references:
  Barrick (2006b) Environment: Performance Tables from
  <http://www.barrick.com/Default.aspx?SectionID=8906c4bd-4ee4-4f15-bf1b-565e357c01e1&LanguageId=1>
  Uncertainty: Environmental report, Placer Dome Inc. 2003
- Transformation, to mineral extraction site [natural resource, land]: 2.321e7 m2; lognormal variance with pedigree 0.1606, pedigree (1,3,5,1,1)
  Estimation: "Transformation, to mineral extraction site" stands for the area disturbed during lifetime of mine.
  Calculated value: The ammount reported in this dataset was obtained by
  adding corresponding values for all mines considered in the country (see sources). This amount equals 2.32E07 m2.
  Further references:
  Barrick (2006b) Environment: Performance Tables from
  <http://www.barrick.com/Default.aspx?SectionID=8906c4bd-4ee4-4f15-bf1b-565e357c01e1&LanguageId=1>
  Uncertainty: Environmental report, Placer Dome Inc. 2003
- Transformation, to unspecified [natural resource, land]: 1.365e7 m2; lognormal variance with pedigree 0.1606, pedigree (1,3,5,1,1)
  (same comment as for Transformation, from mineral extraction site)

## Sampling procedure
environmental report for landuse in the year 2000 and one mine in 2006

## Extrapolations
Buildings and machinery are based on global assumptions. The figures were extrapolated on the basis of the ore production.

## Review by Roberto Dones 2007-09-20
passed
none

## Review by Roland Hischier 2011-12-09
Transfer of documentation done.
