# treatment of used liquid crystal display module, municipal waste incineration

Dataset: EcoSpold 2, unit process
Geography: CH
Time period: 1994-01-01 to 2022-12-31
Technology level: outdated
Classification: ISIC rev.4 ecoinvent: 3821:Treatment and disposal of non-hazardous waste
Classification: EcoSpold01Categories: waste management/municipal incineration
Tags: ConvertedDataset; Treatment
Scenario: Business-as-Usual
System model: Allocation at the point of substitution
Generated by: Roland Hischier
Published in: Hischier R. 2007
Database: ecoinvent
isCopyrightProtected: true

## General comment
Inventoried waste contains 0.87% Plastics from electronic consumer goods; 0.87% Plastics from electronic industrial goods; 82% Glass; 0.87% wiring copper; 0.83% liquid crystals; 0.12% ITO coating; 14.5% electronic goods; .
waste composition (wet, in ppm): upper heating value 2.646 MJ/kg; lower heating value 2.379 MJ/kg; H2O 40144; O 430500; H 7674.6; C 63365; S 102.58; N 1270.5; P 46.362; B 0.0082045; Cl 1519.4; Br 95.711; F 11.587; I n.a.; Ag 30.387; As 0.1305; Ba 8.0249; Cd 10.593; Co 0.51291; Cr 317.5; Cu 26895; Hg 0.16101; Mn 71.044; Mo 0.56082; Ni 1905; Pb 4347.4; Sb 112.38; Se 0.034097; Sn 2351.8; V 0.01305; Zn 2573.8; Be 0.0081182; Sc n.a.; Sr 1.4369; Ti 77.9; Tl 0.0064946; W n.a.; Si 294410; Fe 5671.6; Ca 60879; Al 900.8; K 965.57; Mg 2.0446; Na 52850;
Share of carbon in waste that is biogenic 0%.
Share of iron in waste that is metallic/recyclable 99.5%.
Net energy produced in MSWI: 0MJ/kg waste electric energy and 0MJ/kg waste thermal energy
Allocation of energy production: no substitution or expansion. Total burden allocated to waste disposal function of MSWI.
One kg of this waste produces 0.8496 kg of slag and 0.01608 kg of residues, which are landfilled. Additional solidification with 0.006434 kg of cement.
[This dataset was already contained in the ecoinvent database version 2. It was not individually updated during the transfer to ecoinvent version 3. Life Cycle Impact Assessment results may still have changed, as they are affected by changes in the supply chain, i.e. in other datasets. This dataset was generated following the ecoinvent quality guidelines for version 2. It may have been subject to central changes described in the ecoinvent version 3 change report (http://www.ecoinvent.org/database/ecoinvent-version-3/reports-of-changes/), and the results of the central updates were reviewed extensively. The changes added e.g. consistent water flows and other information throughout the database. The documentation of this dataset can be found in the ecoinvent reports of version 2, which are still available via the ecoinvent website. The change report linked above covers all central changes that were made during the conversion process.]

## Included activities end
waste-specific air and water emisions from incineration, auxiliary material consumption for flue gas cleaning. Short-term emissions to river water and long-term emisisons to ground water from slag compartment (from bottom slag) and residual material landfill (from solidified fly ashes and scrubber slugde). Process energy demands for MSWI.

## Geography
Specific to the technology mix encountered in Switzerland in 2000. Well applicable to modern incineration practices in Europe, North America or Japan.

## Technology
replaced by newer incineration technology with fly ash extraction. Average Swiss MSWI plants in 2000 (grate incinerators) with electrostatic precipitator for fly ash (ESP), wet flue gas scrubber and 29.4% SNCR , 32.2% SCR-high dust , 24.6% SCR-low dust -DeNOx facilities and 13.8% without Denox (by burnt waste, according to Swiss average). Share of waste incinerated in plants with magnetic scrap separation from slag : 50%. Gross electric efficiency technology mix 12.997% and Gross thermal efficiency technology mix 25.57%

## Time period
Waste composition as given in literature reference, theoretical data or other source. Transfer coefficients for modern Swiss MSWI. Emission speciation based on early 90ies data.

## Reference product
- used liquid crystal display module: -1 kg; By-product classification Waste; CPC 39: Wastes or scraps
  EcoSpold01Location=CH
  production volume 0 kg
    outdated. Replaced by newer incineration technology with fly ash extraction.
  property price 0 EUR2005
    Waste products are assigned a price of zero as they are assumed to require further treatment.
  properties: carbon allocation 0.327914 kg, carbon content 0.327914, carbon content, fossil 0.327872, carbon content, non-fossil 4.20542e-5, dry mass 1 kg, water content 0, water in wet mass 0 kg, wet mass 1 kg

## Inputs from technosphere
- ammonia, anhydrous, liquid: 2.2224e-5 kg; lognormal variance with pedigree 1.58, pedigree (1,1,5,1,1)
  EcoSpold01Location=CH
  uncertainty calculated from uncertainty in average DeNOx input, uncertainty in the share of thermal NOx, uncertainty of nitrogen content in average municipal waste and the unertainty in nitrogen content in *this* waste.
  properties: dry mass 1 kg, wet mass 1 kg
- cement, unspecified: 0.0064339 kg; lognormal variance with pedigree 0.11, pedigree (1,1,5,1,1)
  Cement for solidification of landfilled residual material. Uncertainty calculated from unertainty of the waste composition of this waste, of transfer coefficients in the incinerator and of the solidification recipe.
  EcoSpold01Location=CH
  properties: dry mass 1 kg, wet mass 1 kg
- chemical, inorganic: 8.0513e-6 kg; lognormal variance with pedigree 0.27, pedigree (1,1,5,1,1)
  EcoSpold01Location=GLO
  Proxy for Polyelectrolyte. uncertainty calculated from uncertainty in average auxiliary material input, and the unertainty of the waste composition of this waste
  properties: carbon content, fossil 0.003, dry mass 1 kg, wet mass 1 kg
  note on carbon content, fossil: This dataset is an unweighted average of 20 inorganic substances (listed in Tab 88.1, ecoinvent v2.2 report 8, part II), being part of the top100 chemicals included in this database. The C-content has also been calculated as an unweighted average of the C content of the substances composing this dataset.
- chemical, organic: 4.2488e-5 kg; lognormal variance with pedigree 1.3, pedigree (1,1,5,1,1)
  Proxy for TMT15. uncertainty calculated from uncertainty in average auxiliary material input, and the unertainty of the waste composition of this waste
  EcoSpold01Location=GLO
  properties: carbon content, fossil 0.628, dry mass 1 kg, heating value, net 19.03 MJ, wet mass 1 kg
  note on carbon content, fossil: This dataset is an unweighted average of 20 organic substances (listed in Tab 88.1, ecoinvent v2.2 report 8, part II), being part of the top100 chemicals included in this database. The C-content has also been calculated as an unweighted average of the C content of the substances composing this dataset.
- chromium oxide, flakes: 1.2983e-8 kg; lognormal variance with pedigree 2.29, pedigree (1,1,5,1,1)
  Proxy for vanadium pentoxide V2O5 in SCR catalyst, uncertainty calculated from uncertainty in average DeNOx input, uncertainty in the share of thermal NOx, uncertainty of nitrogen content in average municipal waste and the unertainty in nitrogen content in *this* waste.
  EcoSpold01Location=RER
  properties: dry mass 1 kg, wet mass 1 kg
- electricity, for reuse in municipal waste incineration only: 0.057977 kWh; name E_el_prod_MSWI; lognormal variance with pedigree 0.53, pedigree (1,1,5,1,1)
  uncertainty is calculated from uncertainties in waste composition and uncertainties in energy efficiency and the uncertainty in internal energy demand
- heat, district or industrial, natural gas: 0.00195057 MJ; lognormal variance with pedigree 1.58, pedigree (1,1,5,1,1)
  EcoSpold01Location=RER
  uncertainty calculated from uncertainty in average DeNOx input, uncertainty in the share of thermal NOx, uncertainty of nitrogen content in average municipal waste and the unertainty in nitrogen content in *this* waste.
  properties: heating value, net 1 MJ
- heat, for reuse in municipal waste incineration only: 0.23031 MJ; name E_th_prod_MSWI; lognormal variance with pedigree 0.05, pedigree (1,1,5,1,1)
  (same comment as for electricity, for reuse in municipal waste incineration only)
- hydrochloric acid, without water, in 30% solution state: 4.8308e-6 kg; lognormal variance with pedigree 0.27, pedigree (1,1,5,1,1)
  uncertainty calculated from uncertainty in average auxiliary material input, and the unertainty of the waste composition of this waste
  EcoSpold01Location=RER
  properties: dry mass 1 kg, heating value, net 3.32 MJ, wet mass 1 kg
- iron (III) chloride, without water, in 40% solution state: 0.00069726 kg; lognormal variance with pedigree 0.22, pedigree (1,1,5,1,1)
  EcoSpold01Location=CH
  uncertainty calculated from uncertainty in average auxiliary material input, and the unertainty of the waste composition of this waste
  properties: dry mass 1 kg, wet mass 1 kg
- municipal waste incineration facility: 2.5e-10 unit; lognormal variance with pedigree 0.04, pedigree (1,1,5,1,1)
  EcoSpold01Location=CH
  demands per kilogram waste. uncertainty is heeded in the module
- process-specific burdens, municipal waste incineration: 1 kg; lognormal variance with pedigree 0.04, pedigree (1,1,5,1,1)
  demands per kilogram waste. uncertainty is heeded in the module;activityLink introduced to establish a direct link to the corresponding regional supply of this product
  EcoSpold01Location=CH
- process-specific burdens, residual material landfill: 0.016085 kg; lognormal variance with pedigree 0.1, pedigree (1,1,5,1,1)
  EcoSpold01Location=CH
  uncertainty is calculated from uncertainties in waste composition and transfer coefficients in incinerator;activityLink introduced to establish a direct link to the corresponding regional supply of this product
- process-specific burdens, slag landfill: 0.84965 kg; lognormal variance with pedigree 0.05, pedigree (1,1,5,1,1)
  uncertainty is calculated from uncertainties in waste composition and transfer coefficients in incinerator;activityLink introduced to establish a direct link to the corresponding regional supply of this product
  EcoSpold01Location=CH
- quicklime, milled, packed: 0.00023484 kg; lognormal variance with pedigree 0.65, pedigree (1,1,5,1,1)
  uncertainty calculated from uncertainty in average auxiliary material input, and the unertainty of the waste composition of this waste
  EcoSpold01Location=CH
  properties: dry mass 0.99 kg, water content 0.010101, wet mass 1 kg
- residual material landfill: 3.351e-11 unit; lognormal variance with pedigree 0.1, pedigree (1,1,5,1,1)
  uncertainty is calculated from uncertainties in waste composition and transfer coefficients in incinerator
  EcoSpold01Location=CH
- slag landfill: 1.5105e-9 unit; lognormal variance with pedigree 0.05, pedigree (1,1,5,1,1)
  EcoSpold01Location=CH
  uncertainty is calculated from uncertainties in waste composition and transfer coefficients in incinerator
- sodium hydroxide, without water, in 50% solution state: 0.0013628 kg; lognormal variance with pedigree 0.62, pedigree (1,1,5,1,1)
  EcoSpold01Location=RER
  uncertainty calculated from uncertainty in average auxiliary material input, and the unertainty of the waste composition of this waste
  properties: dry mass 1 kg, heating value, net 3.03 MJ, wet mass 1 kg
- titanium dioxide: 6.3615e-7 kg; lognormal variance with pedigree 2.29, pedigree (1,1,5,1,1)
  uncertainty calculated from uncertainty in average DeNOx input, uncertainty in the share of thermal NOx, uncertainty of nitrogen content in average municipal waste and the unertainty in nitrogen content in *this* waste.
  EcoSpold01Location=RER
  properties: dry mass 1 kg, wet mass 1 kg
- waste cement, hydrated: -0.016085 kg; name BP_amount_1; lognormal variance with pedigree 0.07, pedigree (1,1,1,1,1)
  EcoSpold01Location=CH
  Hydrated cement for solidification of landfilled residual material. Uncertainty calculated from unertainty of the waste composition of this waste and transfer coefficients in the incinerator and of the solidification recipe.
  production volume
    Calculated from the production volume of liquid crystal display in proportion to the respective output amounts.
  properties: dry mass 1 kg, wet mass 1 kg

## Emissions to nature
- Aluminium III [air, urban air close to ground]: 1.4072e-6 kg; lognormal variance with pedigree 0.73, pedigree (1,1,5,1,1)
  uncertainty is calculated from uncertainties in waste composition and transfer coefficients in incinerator
- Ammonia [air, urban air close to ground]: 3.4904e-7 kg; lognormal variance with pedigree 1.69, pedigree (1,1,5,1,1)
  uncertainty calculated from uncertainty in average N-emissions, uncertainty in the share of thermal NOx, uncertainty of nitrogen content in average municipal waste and the unertainty in nitrogen content in *this* waste.
- Antimony ion [air, urban air close to ground]: 4.3715e-13 kg; lognormal variance with pedigree 1.11, pedigree (1,1,5,1,1)
  (same comment as for Aluminium III)
- Arsenic ion [air, urban air close to ground]: 1.3311e-15 kg; lognormal variance with pedigree 1.98, pedigree (1,1,5,1,1)
  (same comment as for Aluminium III)
- Barium II [air, urban air close to ground]: 8.0249e-9 kg; lognormal variance with pedigree 1.36, pedigree (1,1,5,1,1)
  (same comment as for Aluminium III)
- Beryllium II [air, urban air close to ground]: 8.1182e-12 kg; lognormal variance with pedigree 1.98, pedigree (1,1,5,1,1)
  (same comment as for Aluminium III)
- Boron [air, urban air close to ground]: 9.8454e-10 kg; lognormal variance with pedigree 1.96, pedigree (1,1,5,1,1)
  (same comment as for Aluminium III)
- Bromine [air, urban air close to ground]: 2.8713e-7 kg; lognormal variance with pedigree 1.02, pedigree (1,1,5,1,1)
  (same comment as for Aluminium III)
- Cadmium II [air, urban air close to ground]: 5.8331e-10 kg; lognormal variance with pedigree 1.34, pedigree (1,1,5,1,1)
  (same comment as for Aluminium III)
- Calcium [air, urban air close to ground]: 1.9846e-6 kg; lognormal variance with pedigree 0.25, pedigree (1,1,5,1,1)
  (same comment as for Aluminium III)
- Carbon dioxide, fossil [air, urban air close to ground]: 0.21739 kg; lognormal variance with pedigree 0.2, pedigree (1,1,5,1,1)
  (same comment as for Aluminium III)
- Carbon monoxide, fossil [air, urban air close to ground]: 0.0002229 kg; lognormal variance with pedigree 0.690625, pedigree (1,3,5,2,1)
  Literature data from switzerland and germany adapted to plant age distribution in switzerland
  Uncertainty: & basic uncertainty of 5; literature data from switzerland and germany adapted to plant age distribution in switzerland
- Chromium III [air, urban air close to ground]: 5.0736e-12 kg; lognormal variance with pedigree 0.96, pedigree (1,1,5,1,1)
  (same comment as for Aluminium III)
- Cobalt II [air, urban air close to ground]: 1.6285e-14 kg; lognormal variance with pedigree 1.8, pedigree (1,1,5,1,1)
  (same comment as for Aluminium III)
- Copper ion [air, urban air close to ground]: 1.3427e-7 kg; lognormal variance with pedigree 0.35, pedigree (1,1,5,1,1)
  (same comment as for Aluminium III)
- Cyanide [air, urban air close to ground]: 3.9646e-7 kg; lognormal variance with pedigree 1.69, pedigree (1,1,5,1,1)
  (same comment as for Ammonia)
- Dinitrogen monoxide [air, urban air close to ground]: 1.8602e-6 kg; lognormal variance with pedigree 1.69, pedigree (1,1,5,1,1)
  (same comment as for Ammonia)
- Hydrochloric acid [air, urban air close to ground]: 1.5087e-8 kg; lognormal variance with pedigree 0.69, pedigree (1,1,5,1,1)
  (same comment as for Aluminium III)
- Hydrogen fluoride [air, urban air close to ground]: 6.0984e-9 kg; lognormal variance with pedigree 1.31, pedigree (1,1,5,1,1)
  (same comment as for Aluminium III)
- Iron ion [air, urban air close to ground]: 1.8934e-7 kg; lognormal variance with pedigree 0.52, pedigree (1,1,5,1,1)
  (same comment as for Aluminium III)
- Lead II [air, urban air close to ground]: 1.6019e-7 kg; lognormal variance with pedigree 0.55, pedigree (1,1,5,1,1)
  (same comment as for Aluminium III)
- Magnesium [air, urban air close to ground]: 2.8154e-9 kg; lognormal variance with pedigree 1.54, pedigree (1,1,5,1,1)
  (same comment as for Aluminium III)
- Manganese II [air, urban air close to ground]: 3.8683e-13 kg; lognormal variance with pedigree 1.17, pedigree (1,1,5,1,1)
  (same comment as for Aluminium III)
- Mercury II [air, urban air close to ground]: 5.561e-15 kg; lognormal variance with pedigree 1.95, pedigree (1,1,5,1,1)
  (same comment as for Aluminium III)
- Methane, fossil [air, urban air close to ground]: 6.3821e-6 kg; lognormal variance with pedigree 0.091225, pedigree (2,3,5,2,1)
  Confidential data from 5 plants in Switzerland and Germany
  Uncertainty: & basic uncertainty of 1.5; confidential data from 5 plants in Switzerland and Germany
- Molybdenum VI [air, urban air close to ground]: 1.1216e-9 kg; lognormal variance with pedigree 1.7, pedigree (1,1,5,1,1)
  (same comment as for Aluminium III)
- Nickel II [air, urban air close to ground]: 8.2215e-11 kg; lognormal variance with pedigree 0.71, pedigree (1,1,5,1,1)
  (same comment as for Aluminium III)
- Nitrogen oxides [air, urban air close to ground]: 1.4015e-5 kg; lognormal variance with pedigree 1.69, pedigree (1,1,5,1,1)
  (same comment as for Ammonia)
- Phosphorus [air, urban air close to ground]: 4.6362e-8 kg; lognormal variance with pedigree 1.12, pedigree (1,1,5,1,1)
  (same comment as for Aluminium III)
- Potassium I [air, urban air close to ground]: 2.9111e-6 kg; lognormal variance with pedigree 0.72, pedigree (1,1,5,1,1)
  (same comment as for Aluminium III)
- Selenium IV [air, urban air close to ground]: 1.7147e-16 kg; lognormal variance with pedigree 2.09, pedigree (1,1,5,1,1)
  (same comment as for Aluminium III)
- Silicon [air, urban air close to ground]: 1.4133e-7 kg; lognormal variance with pedigree 0.16, pedigree (1,1,5,1,1)
  (same comment as for Aluminium III)
- Silver I [air, urban air close to ground]: 3.9475e-10 kg; lognormal variance with pedigree 1.21, pedigree (1,1,5,1,1)
  (same comment as for Aluminium III)
- Sodium [air, urban air close to ground]: 2.5533e-8 kg; lognormal variance with pedigree 0.3, pedigree (1,1,5,1,1)
  (same comment as for Aluminium III)
- Strontium [air, urban air close to ground]: 1.4369e-10 kg; lognormal variance with pedigree 1.6, pedigree (1,1,5,1,1)
  (same comment as for Aluminium III)
- Sulfur dioxide [air, urban air close to ground]: 4.3699e-7 kg; lognormal variance with pedigree 1.01, pedigree (1,1,5,1,1)
  (same comment as for Aluminium III)
- Thallium I [air, urban air close to ground]: 6.4946e-12 kg; lognormal variance with pedigree 1.98, pedigree (1,1,5,1,1)
  (same comment as for Aluminium III)
- Tin ion [air, urban air close to ground]: 2.9943e-6 kg; lognormal variance with pedigree 0.6, pedigree (1,1,5,1,1)
  (same comment as for Aluminium III)
- Titanium ion [air, urban air close to ground]: 7.79e-8 kg; lognormal variance with pedigree 1.06, pedigree (1,1,5,1,1)
  (same comment as for Aluminium III)
- Vanadium V [air, urban air close to ground]: 1.305e-12 kg; lognormal variance with pedigree 2, pedigree (1,1,5,1,1)
  (same comment as for Aluminium III)
- Zinc II [air, urban air close to ground]: 4.1994e-8 kg; lognormal variance with pedigree 0.63, pedigree (1,1,5,1,1)
  (same comment as for Aluminium III)
- Aluminium III [water, ground-, long-term]: 0.00066662 kg; lognormal variance with pedigree 0.66, pedigree (1,1,5,1,1)
  Long-term emissions from landfilling of incineration residues. uncertainty is calculated from uncertainties in waste composition and transfer coefficients in incinerator and landfills.
- Aluminium III [water, surface water]: 7.4955e-8 kg; lognormal variance with pedigree 1.06, pedigree (1,1,5,1,1)
  uncertainty is calculated from uncertainties in waste composition and transfer coefficients in incinerator and landfills
- Antimony ion [water, ground-, long-term]: 7.1824e-5 kg; lognormal variance with pedigree 0.8, pedigree (1,1,5,1,1)
  (same comment as for Aluminium III)
- Antimony ion [water, surface water]: 3.9007e-5 kg; lognormal variance with pedigree 0.83, pedigree (1,1,5,1,1)
  (same comment as for Aluminium III)
- Arsenic ion [water, ground-, long-term]: 7.1667e-8 kg; lognormal variance with pedigree 1.87, pedigree (1,1,5,1,1)
  (same comment as for Aluminium III)
- Arsenic ion [water, surface water]: 5.8833e-8 kg; lognormal variance with pedigree 1.61, pedigree (1,1,5,1,1)
  (same comment as for Aluminium III)
- BOD5, Biological Oxygen Demand [water, ground-, long-term]: 0.0032241 kg; lognormal variance with pedigree 0.2, pedigree (1,1,5,1,1)
  (same comment as for Aluminium III)
- BOD5, Biological Oxygen Demand [water, surface water]: 7.1822e-6 kg; lognormal variance with pedigree 0.6, pedigree (1,1,5,1,1)
  (same comment as for Aluminium III)
- Barium II [water, ground-, long-term]: 7.1244e-6 kg; lognormal variance with pedigree 1.38, pedigree (1,1,5,1,1)
  (same comment as for Aluminium III)
- Barium II [water, surface water]: 1.1034e-9 kg; lognormal variance with pedigree 2.22, pedigree (1,1,5,1,1)
  (same comment as for Aluminium III)
- Beryllium II [water, ground-, long-term]: 6.5381e-9 kg; lognormal variance with pedigree 1.72, pedigree (1,1,5,1,1)
  (same comment as for Aluminium III)
- Beryllium II [water, surface water]: 5.0448e-12 kg; lognormal variance with pedigree 2.19, pedigree (1,1,5,1,1)
  (same comment as for Aluminium III)
- Boron [water, ground-, long-term]: 5.4077e-9 kg; lognormal variance with pedigree 1.26, pedigree (1,1,5,1,1)
  (same comment as for Aluminium III)
- Boron [water, surface water]: 1.2832e-9 kg; lognormal variance with pedigree 1.9, pedigree (1,1,5,1,1)
  (same comment as for Aluminium III)
- Bromine [water, ground-, long-term]: 1.6736e-5 kg; lognormal variance with pedigree 1.01, pedigree (1,1,5,1,1)
  (same comment as for Aluminium III)
- Bromine [water, surface water]: 7.8879e-5 kg; lognormal variance with pedigree 0.84, pedigree (1,1,5,1,1)
  (same comment as for Aluminium III)
- COD, Chemical Oxygen Demand [water, ground-, long-term]: 0.0098568 kg; lognormal variance with pedigree 0.2, pedigree (1,1,5,1,1)
  (same comment as for Aluminium III)
- COD, Chemical Oxygen Demand [water, surface water]: 1.9101e-5 kg; lognormal variance with pedigree 0.69, pedigree (1,1,5,1,1)
  (same comment as for Aluminium III)
- Cadmium II [water, ground-, long-term]: 1.0629e-7 kg; lognormal variance with pedigree 7.07, pedigree (1,1,5,1,1)
  (same comment as for Aluminium III)
- Cadmium II [water, surface water]: 4.8039e-9 kg; lognormal variance with pedigree 1.27, pedigree (1,1,5,1,1)
  (same comment as for Aluminium III)
- Calcium II [water, ground-, long-term]: 0.060464 kg; lognormal variance with pedigree 0.21, pedigree (1,1,5,1,1)
  (same comment as for Aluminium III)
- Calcium II [water, surface water]: 0.00026494 kg; lognormal variance with pedigree 0.67, pedigree (1,1,5,1,1)
  (same comment as for Aluminium III)
- Chloride [water, ground-, long-term]: 5.3935e-5 kg; lognormal variance with pedigree 0.41, pedigree (1,1,5,1,1)
  (same comment as for Aluminium III)
- Chloride [water, surface water]: 0.0014655 kg; lognormal variance with pedigree 0.52, pedigree (1,1,5,1,1)
  (same comment as for Aluminium III)
- Chromium III [water, surface water]: 2.1869e-7 kg; lognormal variance with pedigree 0.87, pedigree (1,1,5,1,1)
  (same comment as for Aluminium III)
- Chromium VI [water, ground-, long-term]: 8.8924e-6 kg; lognormal variance with pedigree 3.17, pedigree (1,1,5,1,1)
  (same comment as for Aluminium III)
- Chromium VI [water, surface water]: 2.2428e-6 kg; lognormal variance with pedigree 0.83, pedigree (1,1,5,1,1)
  (same comment as for Aluminium III)
- Cobalt II [water, ground-, long-term]: 4.4907e-7 kg; lognormal variance with pedigree 1.64, pedigree (1,1,5,1,1)
  (same comment as for Aluminium III)
- Cobalt II [water, surface water]: 8.7742e-11 kg; lognormal variance with pedigree 2.12, pedigree (1,1,5,1,1)
  (same comment as for Aluminium III)
- Copper ion [water, ground-, long-term]: 0.023409 kg; lognormal variance with pedigree 0.29, pedigree (1,1,5,1,1)
  (same comment as for Aluminium III)
- Copper ion [water, surface water]: 1.0409e-6 kg; lognormal variance with pedigree 1.1, pedigree (1,1,5,1,1)
  (same comment as for Aluminium III)
- DOC, Dissolved Organic Carbon [water, ground-, long-term]: 0.0039004 kg; lognormal variance with pedigree 0.2, pedigree (1,1,5,1,1)
  (same comment as for Aluminium III)
- DOC, Dissolved Organic Carbon [water, surface water]: 7.6164e-6 kg; lognormal variance with pedigree 0.69, pedigree (1,1,5,1,1)
  (same comment as for Aluminium III)
- Fluoride [water, ground-, long-term]: 1.0336e-5 kg; lognormal variance with pedigree 0.89, pedigree (1,1,5,1,1)
  (same comment as for Aluminium III)
- Fluoride [water, surface water]: 8.9069e-7 kg; lognormal variance with pedigree 0.93, pedigree (1,1,5,1,1)
  (same comment as for Aluminium III)
- Iron ion [water, ground-, long-term]: 0.0013362 kg; lognormal variance with pedigree 2.11, pedigree (1,1,5,1,1)
  (same comment as for Aluminium III)
- Iron ion [water, surface water]: 1.9196e-6 kg; lognormal variance with pedigree 0.49, pedigree (1,1,5,1,1)
  (same comment as for Aluminium III)
- Lead II [water, ground-, long-term]: 0.00033919 kg; lognormal variance with pedigree 6.56, pedigree (1,1,5,1,1)
  (same comment as for Aluminium III)
- Lead II [water, surface water]: 1.2079e-7 kg; lognormal variance with pedigree 0.7, pedigree (1,1,5,1,1)
  (same comment as for Aluminium III)
- Magnesium [water, ground-, long-term]: 1.8874e-6 kg; lognormal variance with pedigree 1.49, pedigree (1,1,5,1,1)
  (same comment as for Aluminium III)
- Magnesium [water, surface water]: 7.1577e-9 kg; lognormal variance with pedigree 1.99, pedigree (1,1,5,1,1)
  (same comment as for Aluminium III)
- Manganese II [water, ground-, long-term]: 6.1176e-5 kg; lognormal variance with pedigree 1.14, pedigree (1,1,5,1,1)
  (same comment as for Aluminium III)
- Manganese II [water, surface water]: 3.9747e-9 kg; lognormal variance with pedigree 1.81, pedigree (1,1,5,1,1)
  (same comment as for Aluminium III)
- Mercury II [water, ground-, long-term]: 8.3774e-9 kg; lognormal variance with pedigree 3.58, pedigree (1,1,5,1,1)
  (same comment as for Aluminium III)
- Mercury II [water, surface water]: 1.7219e-9 kg; lognormal variance with pedigree 1.81, pedigree (1,1,5,1,1)
  (same comment as for Aluminium III)
- Molybdenum VI [water, ground-, long-term]: 4.6391e-7 kg; lognormal variance with pedigree 1.68, pedigree (1,1,5,1,1)
  (same comment as for Aluminium III)
- Molybdenum VI [water, surface water]: 9.5785e-8 kg; lognormal variance with pedigree 1.14, pedigree (1,1,5,1,1)
  (same comment as for Aluminium III)
- Nickel II [water, ground-, long-term]: 0.0017835 kg; lognormal variance with pedigree 0.58, pedigree (1,1,5,1,1)
  (same comment as for Aluminium III)
- Nickel II [water, surface water]: 1.1948e-6 kg; lognormal variance with pedigree 1.2, pedigree (1,1,5,1,1)
  (same comment as for Aluminium III)
- Nitrate [water, ground-, long-term]: 0.0029974 kg; lognormal variance with pedigree 0.67, pedigree (1,1,5,1,1)
  (same comment as for Aluminium III)
- Nitrate [water, surface water]: 0.00069973 kg; lognormal variance with pedigree 0.73, pedigree (1,1,5,1,1)
  (same comment as for Aluminium III)
- Phosphate [water, ground-, long-term]: 5.4297e-6 kg; lognormal variance with pedigree 5.33, pedigree (1,1,5,1,1)
  (same comment as for Aluminium III)
- Phosphate [water, surface water]: 9.0647e-9 kg; lognormal variance with pedigree 1.34, pedigree (1,1,5,1,1)
  (same comment as for Aluminium III)
- Potassium I [water, ground-, long-term]: 0.00079522 kg; lognormal variance with pedigree 0.48, pedigree (1,1,5,1,1)
  (same comment as for Aluminium III)
- Potassium I [water, surface water]: 0.00016743 kg; lognormal variance with pedigree 0.43, pedigree (1,1,5,1,1)
  (same comment as for Aluminium III)
- Selenium IV [water, ground-, long-term]: 2.2926e-8 kg; lognormal variance with pedigree 1.4, pedigree (1,1,5,1,1)
  (same comment as for Aluminium III)
- Selenium IV [water, surface water]: 1.1105e-8 kg; lognormal variance with pedigree 1.61, pedigree (1,1,5,1,1)
  (same comment as for Aluminium III)
- Silicon [water, ground-, long-term]: 0.0025237 kg; lognormal variance with pedigree 5.75, pedigree (1,1,5,1,1)
  (same comment as for Aluminium III)
- Silicon [water, surface water]: 1.0874e-5 kg; lognormal variance with pedigree 1.17, pedigree (1,1,5,1,1)
  (same comment as for Aluminium III)
- Silver I [water, ground-, long-term]: 1.9152e-5 kg; lognormal variance with pedigree 1.12, pedigree (1,1,5,1,1)
  (same comment as for Aluminium III)
- Silver I [water, surface water]: 3.6164e-9 kg; lognormal variance with pedigree 0.91, pedigree (1,1,5,1,1)
  (same comment as for Aluminium III)
- Sodium I [water, ground-, long-term]: 0.0464 kg; lognormal variance with pedigree 0.22, pedigree (1,1,5,1,1)
  (same comment as for Aluminium III)
- Sodium I [water, surface water]: 0.0064499 kg; lognormal variance with pedigree 0.33, pedigree (1,1,5,1,1)
  (same comment as for Aluminium III)
- Strontium [water, ground-, long-term]: 1.4351e-6 kg; lognormal variance with pedigree 1.56, pedigree (1,1,5,1,1)
  (same comment as for Aluminium III)
- Strontium [water, surface water]: 9.0473e-10 kg; lognormal variance with pedigree 2.27, pedigree (1,1,5,1,1)
  (same comment as for Aluminium III)
- Sulfate [water, ground-, long-term]: 0.00025727 kg; lognormal variance with pedigree 0.62, pedigree (1,1,5,1,1)
  (same comment as for Aluminium III)
- Sulfate [water, surface water]: 4.9806e-5 kg; lognormal variance with pedigree 0.51, pedigree (1,1,5,1,1)
  (same comment as for Aluminium III)
- TOC, Total Organic Carbon [water, ground-, long-term]: 0.0039004 kg; lognormal variance with pedigree 0.2, pedigree (1,1,5,1,1)
  (same comment as for Aluminium III)
- TOC, Total Organic Carbon [water, surface water]: 7.6164e-6 kg; lognormal variance with pedigree 0.69, pedigree (1,1,5,1,1)
  (same comment as for Aluminium III)
- Thallium I [water, ground-, long-term]: 3.7897e-9 kg; lognormal variance with pedigree 1.51, pedigree (1,1,5,1,1)
  (same comment as for Aluminium III)
- Thallium I [water, surface water]: 3.9786e-12 kg; lognormal variance with pedigree 2.12, pedigree (1,1,5,1,1)
  (same comment as for Aluminium III)
- Tin ion [water, ground-, long-term]: 0.0012287 kg; lognormal variance with pedigree 0.97, pedigree (1,1,5,1,1)
  (same comment as for Aluminium III)
- Tin ion [water, surface water]: 8.526e-8 kg; lognormal variance with pedigree 0.87, pedigree (1,1,5,1,1)
  (same comment as for Aluminium III)
- Titanium ion [water, ground-, long-term]: 2.3341e-5 kg; lognormal variance with pedigree 1.4, pedigree (1,1,5,1,1)
  (same comment as for Aluminium III)
- Titanium ion [water, surface water]: 3.7544e-10 kg; lognormal variance with pedigree 2.39, pedigree (1,1,5,1,1)
  (same comment as for Aluminium III)
- Vanadium V [water, ground-, long-term]: 2.2384e-9 kg; lognormal variance with pedigree 2.67, pedigree (1,1,5,1,1)
  (same comment as for Aluminium III)
- Vanadium V [water, surface water]: 8.8055e-12 kg; lognormal variance with pedigree 2.07, pedigree (1,1,5,1,1)
  (same comment as for Aluminium III)
- Zinc II [water, ground-, long-term]: 4.3065e-5 kg; lognormal variance with pedigree 5.22, pedigree (1,1,5,1,1)
  (same comment as for Aluminium III)
- Zinc II [water, surface water]: 4.727e-7 kg; lognormal variance with pedigree 0.53, pedigree (1,1,5,1,1)
  (same comment as for Aluminium III)

## Sampling procedure
waste-specific calculation based on literature data

## Extrapolations
Typical elemental transfer coefficients from current studies for modern MSWI, completed with data from coal power plants and estimates, adapted for inert/burnable waste.

## Review by Jürgen Sutter 2007-08-31
passed.
