# treatment of wastewater, unpolluted, wastewater treatment

Dataset: EcoSpold 2, unit process
Geography: CH
Time period: 2010-01-01 to 2022-12-31
Technology level: current
Classification: ISIC rev.4 ecoinvent: 3700:Sewerage
Scenario: Business-as-Usual
System model: Allocation at the point of substitution
Generated by: Nikolia Stoikou
Database: ecoinvent
isCopyrightProtected: true

## General comment
This dataset represents the treatment of a wastewater, generated from an ordinary transforming activity. Purification in wastewater treatment of 'wastewater, unpolluted'. Recommended use of this dataset: to be used for wastewaters, generated from ordinary transforming activities, of equal or similar composition. The wastewater has a content of TOC: 0 kg/m3, COD: 0 kg/m3 and BOD: 0 kg/m3. TOC is equal to C present in the wastewater, COD is calculated as TOC/0.2565 and BOD is calculated as COD/0.53034. Detailed elemental composition can be found in the properties of the wastewater treated. Share of biogenic carbon in the sludge: 0%.

## Included activities start
The activity starts with the wastewater being available at the gate of the treatment facility. Collection and transportation of the wastewater to the treatment plant is not included.

## Included activities end
The activity ends with the wastewater being treated and waste-specific emissions released to the environment. Expenditures from treatment of wastewater in waste treatment plant are included as well as relevant infrastructure of the plant. Emissions from any sludge digestion, biogas generation and utilization (heeding specific wastewater composition) are also included. Waste-specific direct emissions of untreated wastewater and required territory-specific infrastructure for sewers are not contained within this dataset but instead in the regional market datasets for this wastewater.

## Geography
The site has mean annual temperature (MAT) of 9.5 degC, mean annual precipitation (MAP) of 1483.00559816076 mm/year, mean annual actual evaporation (EAT) of 528.63778611689 mm/year. In the WWT plant, 0% of its water input are lost due to evaporation from pools, 0% of water is *gained* from organic mass degradation, and 0% is removed off site via sludge disposal.

## Technology
This is an inventory for the disposal of a selected wastewater in Switzerland. The reference unit is 1 m3 wastewater input. This activity represents the treatment of a specific wastewater in a WWT plant (while direct emissions and sewering are heeded in the upstream market dataset for this wastewater). The size of the treatment plant infrastructure is for a national average territory situation. The assumed size of the WWTP treats 90.6 Mio m3 per year. The mixture of WWTP with one, two, or three stages is 0%-11.2%-88.8%. The actual, waste-specific oxygen requirement in the biological stages is 0kg O. Generated waste-specific raw sludge is treated with anaerobic digestion. The digestion process produces 0 litres of biogas. 23.6% of the biogas is utilized for energy. The remainder is flared. The gross electric efficiency is 26.564%. The gross thermal efficiency is 47.853%. After digestion, the remaining total sludge mass (dry matter) is 0kg DM.

## Reference product
- iron scrap, sorted, pressed: 1 kg; By-product classification Recyclable; CPC 39310: Slag, dross, scalings and other waste from the manufacture of iron or steel; lognormal variance with pedigree 0.3109, pedigree (1,1,1,1,1)
  scrap output from used infrastructure for wastewater treatment plant.
  Uncertainty: Uncertainty calculated from wastewater technosphere fate uncertainty and treatment infrastructure uncertainty.
  production volume 287375 kg
    Calculated in proportion to wastewater reference product.
  property price 0.175 EUR2005
    Temporary price data. Calculated as 90% of purchasers price based on: 2005 import and export prices (total trades (USD) divided by total weight (kg) in biggest economies of the world: EU27, USA, Brasil, China, India, Japan and Russia) from UN Commodity Trade Statistics Database (http://data.un.org/Explorer.aspxDatabase [Accessed 2011.06.20]). Commodity: Waste or scrap, of cast iron
  properties: carbon allocation 0 kg, carbon content 0, carbon content, fossil 0, carbon content, non-fossil 0, dry mass 1 kg, water content 0, water in wet mass 0 kg, wet mass 1 kg

## Inputs from technosphere
- EDTA, ethylenediaminetetraacetic acid: 1.54497e-6 kg
- acetic acid, without water, in 98% solution state: 4.62114e-5 kg
- acrylic dispersion, with water, in 58% solution state: 1.00438e-8 kg
- acrylic varnish, with water, in 53% solution state: 3.30011e-9 kg
- activated carbon, granular: 2.03573e-7 kg
- activated silica: 3.98067e-7 kg
- alkylketene dimer sizing agent, for paper production: 6.19961e-6 kg
- aluminium scrap, post-consumer: -2.10161e-7 kg
- aluminium sulfate, powder: 0.00144028 kg
- aluminium, cast alloy: 3.26524e-7 kg
- aluminium, wrought alloy: 0.000185828 kg
- ammonia, anhydrous, liquid: 3.26353e-7 kg
- ammonium bicarbonate: 3.88544e-6 kg
- ash from paper production sludge: -2.49701e-7, -9.55266e-6 kg (2 suppliers, which the file names only by identifier); sum of these -9.80236e-6 kg
- bark: -2.15967e-5 kg
- benzene: 1.07998e-6 kg
- building, hall: 2.80582e-7 m2
- building, multi-storey: 1.58505e-6 m3
- carbon dioxide, liquid: 6.47451e-6 kg
- cast iron: 3.27764e-7 kg
- chemical factory, organics: 4.82106e-11 unit
- chemical, inorganic: 3.67188e-5 kg
- chemical, organic: 0.00306452 kg
- chlorine dioxide: 2.25987e-8 kg
- chlorine, gaseous: 0.00300602 kg
- chlorine, liquid: 9.92248e-7 kg
- chromium oxide, flakes: 4.24552e-7 kg
- compressed air, 600 kPa gauge: 0.00107544 m3
- concrete, 25MPa: 1.64383e-9, 7.11779e-10, 2.73667e-7, 3.32407e-10, 1.1254e-8, 1.10746e-8 m3 (6 suppliers, which the file names only by identifier); sum of these 2.98684e-7 m3
- concrete, medium strength: 2.15254e-8 m3
- copper, cathode: 3.44797e-10 kg
- corrugated board box: 2.4063e-7, 5.58528e-7, 1.7224e-8, 8.96349e-9 kg (4 suppliers, which the file names only by identifier); sum of these 8.25345e-7 kg
- decommissioned airport infrastructure, contaminated gravel: -9.78427e-13 unit
- diesel: 0.000316032 kg
- diesel, burned in building machine: 4.88542e-5 MJ
- diesel, burned in diesel-electric generating set, 18.5kW: 1.82009e-7 MJ
- electricity, low voltage: 2.23394e-7, 1.93063e-6, 6.06515e-8, 2.01814e-7, 2.7174e-7, 1.86895e-7, 1.03114e-6, 3.66663e-6, 1.16008e-5, 1.98417e-6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 kWh (48 suppliers, which the file names only by identifier); sum of these 0.000702257 kWh
- electricity, medium voltage: 4.76208e-7, 6.43002e-7, 5.94449e-7, 1.93037e-7, 0.00202319, 2.69169e-6, 1.13068e-5, 6.10146e-5, 6.10658e-7, 2.28671e-7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 kWh (51 suppliers, which the file names only by identifier); sum of these 0.514677 kWh
- ethoxylated alcohol (AE3): 0.000297783 kg
- ethoxylated alcohol (AE7): 0.000303545, 2.73549e-5 kg (2 suppliers, which the file names only by identifier); sum of these 0.0003309 kg
- ethylene: 0.0121052 kg
- ethylene dichloride: 0.000982912 kg
- ethylene glycol: 4.01155e-5 kg
- ethylene glycol monoethyl ether: 4.42266e-9 kg
- excavation, skid-steer loader: 7.30885e-8 m3
- extrusion of plastic sheets and thermoforming, inline: 1.19252e-7 kg
- glued laminated timber, average glue mix: 5.26324e-10, 1.14275e-9 m3 (2 suppliers, which the file names only by identifier); sum of these 1.66907e-9 m3
- gravel, crushed: 2.32866e-5 kg
- hazardous waste, for incineration: -0.000190668, -4.98395e-6 kg (2 suppliers, which the file names only by identifier); sum of these -0.000195652 kg
- heat, central or small-scale, other than natural gas: 9.49729e-5 MJ
- heat, district or industrial, natural gas: 0.0542403, 0.00594751, 3.55396e-6, 9.62339e-6, 1.58137e-7, 0.000138902 MJ (6 suppliers, which the file names only by identifier); sum of these 0.0603401 MJ
- heat, district or industrial, other than natural gas: 0.788263, 0.011341 MJ (2 suppliers, which the file names only by identifier); sum of these 0.799604 MJ
- heat, from steam, in chemical industry: 0.00909957 MJ
- heavy fuel oil: 3.71116e-5 kg
- hydrochloric acid, without water, in 30% solution state: 0.000378286 kg
- hydrogen peroxide, without water, in 50% solution state: 0.000108349, 3.96831e-5 kg (2 suppliers, which the file names only by identifier); sum of these 0.000148032 kg
- hydrogen, liquid: 3.361e-6 kg
- industrial machine, heavy, unspecified: 1.83996e-9 kg
- inert waste: -2.3162e-9, -1.99487e-11 kg (2 suppliers, which the file names only by identifier); sum of these -2.33615e-9 kg
- ion-exchanger for water treatment: 9.26478e-10 unit
- iron(III) sulfate, without water, in 12.5% iron solution state: 1.50571e-6 kg
- isopropanol: 1.83996e-8 kg
- kaolin: 7.64955e-5 kg
- latex: 4.16834e-5 kg
- light fuel oil: 8.20119e-6 kg
- lime, hydrated, loose weight: 2.91142e-6 kg
- lime, packed: 5.02988e-6, 0.00019756 kg (2 suppliers, which the file names only by identifier); sum of these 0.00020259 kg
- limestone residue: -1.81058e-5 kg
- lubricating oil: 4.7329e-7, 0.00272977 kg (2 suppliers, which the file names only by identifier); sum of these 0.00273025 kg
- magnesium sulfate: 5.29669e-7 kg
- maize starch: 1.37912e-6 kg
- medium density fibreboard: 1.0914e-10, 6.9898e-10 m3 (2 suppliers, which the file names only by identifier); sum of these 8.0812e-10 m3
- metal working, average for metal product manufacturing: 1.23956e-9 kg
- metal working, average for steel product manufacturing: 8.94762e-9 kg
- municipal solid waste: -8.07033e-9, -8.96202e-7, -2.53898e-9, -5.70766e-6, -2.03352e-9 kg (5 suppliers, which the file names only by identifier); sum of these -6.6165e-6 kg
- natural gas, high pressure: 0.000904202, 6.47874e-6 m3 (2 suppliers, which the file names only by identifier); sum of these 0.00091068 m3
- nitric acid, without water, in 50% solution state: 0.00297783 kg
- nitrogen, liquid: 0.00106969 kg
- oxygen, liquid: 0.000823541 kg
- paper, woodfree, coated: 1.17319e-5 kg
- particleboard, uncoated: 2.19546e-9, 1.06064e-9 m3 (2 suppliers, which the file names only by identifier); sum of these 3.2561e-9 m3
- petrol, unleaded: 6.02711e-5 kg
- phosphoric acid, industrial grade, without water, in 85% solution state: 2.21045e-7 kg
- polyacrylamide: 1.25504e-5 kg
- polyethylene terephthalate, granulate, amorphous: 2.55541e-8 kg
- polyethylene, low density, granulate: 9.92608e-5 kg
- polymethyl methacrylate, beads: 3.35108e-8 kg
- polypropylene, granulate: 9.36982e-8 kg
- potassium permanganate: 1.65192e-7 kg
- potato starch: 5.16933e-5 kg
- printing ink, offset, without solvent, in 47.5% solution state: 7.82405e-8 kg
- propylene: 0.00411194 kg
- propylene glycol, liquid: 0.000160462 kg
- pulpwood, hardwood, measured as solid wood under bark: 2.04028e-6 m3
- pulpwood, softwood, measured as solid wood under bark: 5.95198e-7, 6.11266e-6 m3 (2 suppliers, which the file names only by identifier); sum of these 6.70786e-6 m3
- quicklime, milled, loose: 6.80595e-5 kg
- reinforcing steel: 2.43122e-5 kg
- retention aid, for paper production: 2.30474e-7 kg
- rosin size, for paper production: 4.41213e-6, 2.77117e-7 kg (2 suppliers, which the file names only by identifier); sum of these 4.68925e-6 kg
- sawlog and veneer log, eucalyptus ssp., measured as solid wood under bark: 7.12064e-8 m3
- sawnwood, hardwood, dried (u=10%), planed: 4.66021e-11, 1.89211e-11 m3 (2 suppliers, which the file names only by identifier); sum of these 6.55232e-11 m3
- scrap aluminium: -0.00142229, -6.67306e-5, -2.18089e-7 kg (3 suppliers, which the file names only by identifier); sum of these -0.00148924 kg
- scrap copper: -1.54521e-11, -3.29345e-10 kg (2 suppliers, which the file names only by identifier); sum of these -3.44797e-10 kg
- scrap steel: -1.12055e-10, -2.46916e-7, -8.84433e-8 kg (3 suppliers, which the file names only by identifier); sum of these -3.35472e-7 kg
- seawater reverse osmosis module: 5.21469e-9 m2
- sewage sludge, dried: -3.12172e-6 kg
- sheet rolling, aluminium: 2.10161e-7 kg
- silica sand: 6.56189e-7 kg
- sludge from pulp and paper production: -5.84197e-5 kg
- soda ash, light: 8.73677e-6 kg
- sodium chlorate, powder: 0.00113997, 0.000131978 kg (2 suppliers, which the file names only by identifier); sum of these 0.00127195 kg
- sodium chloride, brine solution: 0.0010882 kg
- sodium chloride, powder: 0.000377765 kg
- sodium dithionite, anhydrous: 8.31917e-9, 3.94922e-8 kg (2 suppliers, which the file names only by identifier); sum of these 4.78113e-8 kg
- sodium hydrosulfide: 6.15535e-6 kg
- sodium hydroxide, without water, in 50% solution state: 0.0129969 kg
- sodium hypochlorite, without water, in 15% solution state: 0.000272111 kg
- sodium phosphate: 3.46979e-7 kg
- sodium pyrophosphate: 8.10397e-8 kg
- sodium silicate, solid: 2.93946e-7 kg
- sodium sulfate, anhydrite: 1.46099e-5, 2.38631e-6 kg (2 suppliers, which the file names only by identifier); sum of these 1.69962e-5 kg
- sodium tripolyphosphate: 2.26191e-8 kg
- solvent, organic: 6.23545e-5 kg
- spent activated carbon, granular: -1.97466e-7 kg
- spent solvent mixture: -9.1033e-9, -1.95329e-7, -8.34083e-6 kg (3 suppliers, which the file names only by identifier); sum of these -8.54526e-6 kg
- steam, in chemical industry: 0.00126697, 0.00718595 kg (2 suppliers, which the file names only by identifier); sum of these 0.00845292 kg
- steatite: 1.56913e-6 kg
- steel, low-alloyed: 8.94762e-9 kg
- steel, low-alloyed, hot rolled: 3.26524e-7 kg
- sulfur: 5.3055e-6 kg
- sulfur dioxide, liquid: 1.37306e-6 kg
- sulfuric acid: 0.0145558 kg
- synthetic rubber: 1.51079e-9 kg
- tap water: 0.000141582, 0.175608, 0.000233988, 0.245106, 2.53067e-5, 0.00043661, 0.0675197, 0.000153494, 0.0011762 kg (9 suppliers, which the file names only by identifier); sum of these 0.490401 kg
- textile, woven cotton: 2.38013e-9 kg
- thermoforming, with calendering: 3.35919e-9 kg
- titanium tetrachloride: 5.41322e-6 kg
- transport, freight train: 3.41675e-5 metric ton*km
- transport, freight, lorry >32 metric ton, EURO5: 8.41388e-5 metric ton*km
- transport, freight, sea, bulk carrier for dry goods: 0.000423261 metric ton*km
- ultrafiltration module: 2.21696e-11 unit
- ultraviolet lamp: 9.61015e-9 unit
- vinyl chloride: 0.000897804 kg
- waste bitumen sheet: -0.00272967 kg
- waste bulk iron, excluding reinforcement: -1.20798e-9, -3.15759e-11 kg (2 suppliers, which the file names only by identifier); sum of these -1.23956e-9 kg
- waste emulsion paint: -2.1751e-9, -2.05034e-10 kg (2 suppliers, which the file names only by identifier); sum of these -2.38013e-9 kg
- waste paper, unsorted: -1.64584e-6, -1.64584e-6 kg (2 suppliers, which the file names only by identifier); sum of these -3.29167e-6 kg
- waste paperboard: -5.39521e-10, -3.51883e-10, -6.56331e-8, -3.5331e-9, -2.18754e-6, -1.90094e-10, -1.94952e-9, -4.71762e-11 kg (8 suppliers, which the file names only by identifier); sum of these -2.25978e-6 kg
- waste paperboard, unsorted: -3.72212e-7, -3.72212e-7 kg (2 suppliers, which the file names only by identifier); sum of these -7.44424e-7 kg
- waste plastic, mixture: -2.06034e-5 kg
- waste polyethylene/polypropylene product: -8.4799e-8, -3.34495e-8, -1.00373e-9 kg (3 suppliers, which the file names only by identifier); sum of these -1.19252e-7 kg
- waste textile, soiled: -7.33703e-10, -1.09816e-11 kg (2 suppliers, which the file names only by identifier); sum of these -7.44685e-10 kg
- waste wood, post-consumer: -1.45793e-6, -1.45793e-6 kg (2 suppliers, which the file names only by identifier); sum of these -2.91586e-6 kg
- waste wood, untreated: -0.00397043 kg
- waste yarn and waste textile: -0.000120772 kg
- wastewater from concrete production: -3.89388e-11, -8.05207e-9 m3 (2 suppliers, which the file names only by identifier); sum of these -8.09101e-9 m3
- wastewater, average: -5.82736e-7, -2.31875e-5 m3 (2 suppliers, which the file names only by identifier); sum of these -2.37702e-5 m3
- wastewater, unpolluted: -0.0483019, -0.000183291 m3 (2 suppliers, which the file names only by identifier); sum of these -0.0484852 m3
- water works, capacity 1.1E10l/year: 2.77093e-13, 7.71272e-13 unit (2 suppliers, which the file names only by identifier); sum of these 1.04836e-12 unit
- water, decarbonised: 7.89178, 0.024857, 39.1467, 25.9497, 1.43258 kg (5 suppliers, which the file names only by identifier); sum of these 74.4456 kg
- water, deionised: 7.92853e-7, 0.000220252 kg (2 suppliers, which the file names only by identifier); sum of these 0.000221045 kg
- white spirit: 1.24333e-5 kg
- wire drawing, copper: 3.44797e-10 kg
- wood chips, dry, measured as dry mass: 0.00296919 kg
- wood chips, wet, measured as dry mass: 3.85266e-5, 0.000499364, 0.00123353 kg (3 suppliers, which the file names only by identifier); sum of these 0.00177142 kg
- wooden board factory, organic bonded boards: 2.19423e-16 unit
- yarn, cotton: 3.91109e-5 kg

## Inputs from nature
- Occupation, industrial area [natural resource, land]: 0.000577272 m2*year
- Occupation, traffic area, road network [natural resource, land]: 0.000283744 m2*year
- Oxygen [natural resource, in air]: 0.00400247 kg
- Transformation, from unspecified [natural resource, land]: 8.61016e-6 m2
- Transformation, to industrial area [natural resource, land]: 5.77272e-6 m2
- Transformation, to traffic area, road network [natural resource, land]: 2.83744e-6 m2
- Water, cooling, unspecified natural origin [natural resource, in water]: 0.000889482 m3
- Water, lake [natural resource, in water]: 0.000362923 m3
- Water, river [natural resource, in water]: 0.000348001 m3
- Water, unspecified natural origin [natural resource, fossil well]: 0.000240442 m3
- Water, unspecified natural origin [natural resource, in water]: 1.25658e-5 m3
- Water, well, in ground [natural resource, in water]: 0.0118103 m3

## Emissions to nature
- 2-Propanol [air, urban air close to ground]: 1.83996e-8 kg
- Acetaldehyde [air, unspecified]: 2.28453e-10 kg
- Acetic acid [air, unspecified]: 1.26989e-9 kg
- Acetone [air, unspecified]: 2.26014e-10 kg
- Ammonia [air, unspecified]: 9.56547e-8 kg
- Arsenic ion [air, unspecified]: 1.95879e-11 kg
- Benzene [air, unspecified]: 9.8078e-10 kg
- Benzene, ethyl- [air, urban air close to ground]: 8.17854e-10 kg
- Benzo(a)pyrene [air, unspecified]: 7.63373e-14 kg
- Butane [air, unspecified]: 1.81701e-9 kg
- Cadmium II [air, unspecified]: 8.33847e-12 kg
- Calcium [air, unspecified]: 1.65744e-10 kg
- Carbon dioxide, fossil [air, non-urban air or from high stacks]: 0.0011839 kg
- Carbon dioxide, fossil [air, unspecified]: 0.00223412 kg
- Carbon dioxide, fossil [air, urban air close to ground]: 7.24146e-6 kg
- Carbon dioxide, non-fossil [air, unspecified]: 0.00522199 kg
- Carbon monoxide, fossil [air, non-urban air or from high stacks]: 6.98597e-7 kg
- Carbon monoxide, fossil [air, unspecified]: 1.31373e-6 kg
- Chlorine [air, unspecified]: 4.7771e-9 kg
- Chloroethylene [air, unspecified]: 1.87855e-7 kg
- Chloroform [air, unspecified]: 1.31906e-8 kg
- Chromium III [air, unspecified]: 4.50621e-11 kg
- Chromium VI [air, unspecified]: 7.53381e-14 kg
- Cobalt II [air, unspecified]: 4.9723e-11 kg
- Copper ion [air, unspecified]: 2.68088e-10 kg
- Dinitrogen monoxide [air, unspecified]: 2.25295e-7 kg
- Dioxins, measured as 2,3,7,8-tetrachlorodibenzo-p-dioxin [air, unspecified]: 1.1753e-16 kg
- Ethane, 1,2-dichloro- [air, unspecified]: 4.17479e-7 kg
- Ethanol [air, unspecified]: 4.52029e-10 kg
- Ethylene [air, unspecified]: 4.00024e-6 kg
- Ethylene [air, urban air close to ground]: 3.95996e-7 kg
- Formaldehyde [air, unspecified]: 1.23562e-9 kg
- Heptane [air, urban air close to ground]: 8.00129e-9 kg
- Hydrocarbons, aliphatic, alkanes, unspecified [air, unspecified]: 1.07136e-9 kg
- Hydrocarbons, aliphatic, unsaturated [air, unspecified]: 4.52029e-11 kg
- Hydrocarbons, aromatic [air, unspecified]: 2.36471e-10 kg
- Hydrochloric acid [air, unspecified]: 5.00719e-8 kg
- Hydrogen [air, unspecified]: 9.69392e-9 kg
- Hydrogen fluoride [air, unspecified]: 7.54616e-11 kg
- Iron ion [air, unspecified]: 1.23555e-9 kg
- Lead II [air, unspecified]: 2.18481e-10 kg
- Mercury II [air, unspecified]: 1.83592e-13 kg
- Methane, fossil [air, unspecified]: 1.04327e-7 kg
- Methane, non-fossil [air, unspecified]: 8.35987e-7 kg
- Methane, tetrachloro-, R-10 [air, unspecified]: 7.00672e-9 kg
- Methanol [air, unspecified]: 7.6845e-10 kg
- Methanol [air, urban air close to ground]: 8.44018e-10 kg
- Molybdenum VI [air, unspecified]: 1.20541e-11 kg
- Monochloroethane [air, unspecified]: 1.10156e-8 kg
- NMVOC, non-methane volatile organic compounds [air, non-urban air or from high stacks]: 2.31887e-5 kg
- NMVOC, non-methane volatile organic compounds [air, unspecified]: 5.32837e-6 kg
- Nickel II [air, unspecified]: 6.75282e-11 kg
- Nitrogen oxides [air, non-urban air or from high stacks]: 5.0976e-6 kg
- Nitrogen oxides [air, unspecified]: 5.55673e-6 kg
- PAH, polycyclic aromatic hydrocarbons [air, unspecified]: 2.54649e-11 kg
- Palladium II [air, unspecified]: 4.46494e-11 kg
- Particulate Matter, < 2.5 um [air, unspecified]: 1.3873e-7 kg
- Particulate Matter, > 10 um [air, unspecified]: 5.00604e-7 kg
- Particulate Matter, > 2.5 um and < 10um [air, unspecified]: 1.44164e-6 kg
- Pentane [air, unspecified]: 2.99985e-9 kg
- Propane [air, unspecified]: 5.39986e-10 kg
- Propene [air, unspecified]: 2.14175e-7 kg
- Propionic acid [air, unspecified]: 4.87775e-11 kg
- Propylene oxide [air, urban air close to ground]: 1.53611e-9 kg
- Selenium IV [air, unspecified]: 1.80811e-11 kg
- Sodium [air, unspecified]: 1.13007e-9 kg
- Sulfur dioxide [air, unspecified]: 7.69243e-7 kg
- Sulfur hexafluoride [air, unspecified]: 1.1668e-11 kg
- Toluene [air, unspecified]: 5.43433e-10 kg
- Toluene [air, urban air close to ground]: 7.2248e-10 kg
- Trichloroethylene [air, unspecified]: 4.37824e-9 kg
- Vanadium V [air, unspecified]: 1.50676e-9 kg
- Water [air, unspecified]: 0.0290627 m3
- Water [air, urban air close to ground]: 5.72037e-5 m3
- Xylene [air, urban air close to ground]: 7.2248e-10 kg
- Zinc II [air, unspecified]: 5.18265e-11 kg
- Oils, unspecified [soil, unspecified]: 2.63933e-7 kg
- AOX, Adsorbable Organic Halogen [water, ground-]: 1.82128e-7 kg
- AOX, Adsorbable Organic Halogen [water, surface water]: 2.56651e-7 kg
- AOX, Adsorbable Organic Halogen [water, unspecified]: 9.60653e-9 kg
- Aluminium III [water, unspecified]: 0.000148897 kg
- Ammonium [water, ground-]: 7.06343e-8 kg
- Ammonium [water, unspecified]: 1.90866e-8 kg
- Aniline [water, ground-]: 1.06031e-8 kg
- Aniline [water, unspecified]: 1.93791e-10 kg
- Antimony ion [water, ground-]: 2.46876e-10 kg
- Antimony ion [water, unspecified]: 9.87452e-13 kg
- Arsenic ion [water, ground-]: 1.85674e-7 kg
- Arsenic ion [water, unspecified]: 7.17043e-10 kg
- BOD5, Biological Oxygen Demand [water, ground-]: 2.69979e-6 kg
- BOD5, Biological Oxygen Demand [water, unspecified]: 6.93638e-5 kg
- Benzene, hexachloro- [water, unspecified]: 5.68497e-13 kg
- Benzene, pentachloro- [water, unspecified]: 9.32853e-13 kg
- COD, Chemical Oxygen Demand [water, ground-]: 1.07796e-5 kg
- COD, Chemical Oxygen Demand [water, unspecified]: 0.000107581 kg
- Cadmium II [water, ground-]: 3.10437e-8 kg
- Cadmium II [water, unspecified]: 7.44472e-8 kg
- Calcium II [water, surface water]: 1.70774e-6 kg
- Chloride [water, surface water]: 0.000791686 kg
- Chloride [water, unspecified]: 0.000713858 kg
- Chlorine [water, ground-]: 2.18824e-8 kg
- Chlorine [water, unspecified]: 2.91291e-10 kg
- Chloroethylene [water, unspecified]: 2.72906e-10 kg
- Chloroform [water, unspecified]: 7.31482e-11 kg
- Chromium III [water, ground-]: 3.58802e-8 kg
- Chromium III [water, unspecified]: 7.68534e-10 kg
- Chromium VI [water, ground-]: 3.59286e-9 kg
- Chromium VI [water, unspecified]: 1.16091e-10 kg
- Copper ion [water, ground-]: 5.12859e-8 kg
- Copper ion [water, unspecified]: 1.49084e-6 kg
- Cyanide [water, ground-]: 6.61499e-9 kg
- Cyanide [water, unspecified]: 3.88753e-11 kg
- DOC, Dissolved Organic Carbon [water, unspecified]: 3.40593e-5 kg
- Dioxins, measured as 2,3,7,8-tetrachlorodibenzo-p-dioxin [water, unspecified]: 2.03268e-16 kg
- Dissolved solids [water, ground-]: 3.90624e-5 kg
- Dissolved solids [water, unspecified]: 5.79643e-7 kg
- Ethane, 1,2-dichloro- [water, unspecified]: 6.09585e-10 kg
- Fluoride [water, ground-]: 3.11553e-8 kg
- Fluoride [water, unspecified]: 2.23287e-9 kg
- Iron ion [water, ground-]: 4.04565e-8 kg
- Iron ion [water, unspecified]: 2.24207e-6 kg
- Lead II [water, ground-]: 1.55627e-9 kg
- Lead II [water, unspecified]: 1.98525e-6 kg
- Magnesium [water, surface water]: 1.02584e-6 kg
- Manganese II [water, ground-]: 3.20528e-8 kg
- Manganese II [water, unspecified]: 1.27058e-5 kg
- Mercury II [water, ground-]: 3.78313e-10 kg
- Mercury II [water, unspecified]: 2.13129e-12 kg
- Methane, tetrachloro-, R-10 [water, unspecified]: 4.48196e-11 kg
- Nickel II [water, ground-]: 4.70385e-8 kg
- Nickel II [water, unspecified]: 2.16396e-5 kg
- Nitrate [water, ground-]: 1.97728e-8 kg
- Nitrate [water, surface water]: 2.64838e-6 kg
- Nitrate [water, unspecified]: 7.25812e-9 kg
- Nitrogen [water, ground-]: 1.77544e-6 kg
- Nitrogen [water, unspecified]: 5.98951e-7 kg
- Nitrogen, organic bound [water, unspecified]: 5.50964e-8 kg
- Oils, unspecified [water, ground-]: 3.67234e-7 kg
- Oils, unspecified [water, unspecified]: 4.52553e-8 kg
- Phenol [water, ground-]: 1.76886e-8 kg
- Phenol [water, unspecified]: 1.94376e-10 kg
- Phosphate [water, surface water]: 4.20567e-6 kg
- Phosphorus [water, ground-]: 1.60618e-7 kg
- Phosphorus [water, unspecified]: 8.02045e-8 kg
- Potassium I [water, surface water]: 1.66671e-6 kg
- Selenium IV [water, ground-]: 6.81657e-9 kg
- Selenium IV [water, unspecified]: 9.71882e-12 kg
- Silicon [water, surface water]: 1.15692e-6 kg
- Sodium I [water, surface water]: 0.000513352 kg
- Sodium I [water, unspecified]: 0.00430821 kg
- Sulfate [water, surface water]: 4.10052e-7 kg
- Sulfate [water, unspecified]: 0.0112195 kg
- Sulfide [water, ground-]: 4.37952e-8 kg
- Sulfide [water, unspecified]: 5.80801e-10 kg
- Suspended solids, unspecified [water, ground-]: 3.24738e-6 kg
- Suspended solids, unspecified [water, unspecified]: 5.94253e-7 kg
- TOC, Total Organic Carbon [water, ground-]: 6.66653e-7 kg
- TOC, Total Organic Carbon [water, unspecified]: 3.33926e-5 kg
- Tin ion [water, unspecified]: 1.24076e-5 kg
- Vanadium V [water, ground-]: 6.45594e-9 kg
- Vanadium V [water, unspecified]: 3.88753e-11 kg
- Water [water, unspecified]: 6.52798e-7 m3
- Zinc II [water, ground-]: 8.27453e-8 kg
- Zinc II [water, unspecified]: 4.47055e-6 kg
