# ethylene oxide production

Dataset: EcoSpold 2, unit process
Geography: RoW
Time period: 1997-01-01 to 2022-12-31
Technology level: current
Classification: EcoSpold01Categories: chemicals/organics
Classification: ISIC rev.4 ecoinvent: 2011:Manufacture of basic chemicals
Tags: ConvertedDataset
Scenario: Business-as-Usual
System model: Allocation at the point of substitution
Generated by: Mike Chudacoff
Published in: Althaus H.-J. 2007
Database: ecoinvent
isCopyrightProtected: true

## General comment
The processes that are used to produce ethylene oxide from ethylene, oxygen or air are described in this inventory. These processes also produce carbon dioxide in some quantity.
[This dataset was already contained in the ecoinvent database version 2. It was not individually updated during the transfer to ecoinvent version 3. Life Cycle Impact Assessment results may still have changed, as they are affected by changes in the supply chain, i.e. in other datasets. This dataset was generated following the ecoinvent quality guidelines for version 2. It may have been subject to central changes described in the ecoinvent version 3 change report (http://www.ecoinvent.org/database/ecoinvent-version-3/reports-of-changes/), and the results of the central updates were reviewed extensively. The changes added e.g. consistent water flows and other information throughout the database. The documentation of this dataset can be found in the ecoinvent reports of version 2, which are still available via the ecoinvent website. The change report linked above covers all central changes that were made during the conversion process.]

## Included activities end
Precursors, transports, infrastructure.

## Geography
RER

## Technology
represents a current cross-section of actual plants in Europe

## Parameters
- fraction, process water, to air: 0.205 dimensionless; lognormal variance with pedigree 0.092025, pedigree (4,4,3,2,4)

## Reference product
- ethylene oxide: 1 kg; By-product classification allocatable product; CPC 34170: Ethers, alcohol peroxides, ether peroxides, epoxides, acetals and hemiacetals, and their halogenated, sulphona[…]; CAS 75-21-8
  EcoSpold01Location=RER
  production volume 2.67763 kg
    This is a placeholder value that does not reflect real-world production volumes. This dataset does not currently require a real-world production volume to work in the database framework, and no actual data were collected yet. This has no negative effect on the results of the ecoinvent database.
  property heating value, net 27.53 MJ
    LHV is calculated based on the elemental composition of the substance. Based on the CAS number of the substance (000075-21-8), the chemical formula of the substance is found to be: C2H4O, (PubChem 2020).
    Reference: Kim, S., Chen, J., Cheng, T., Gindulyte, A., He, J., He, S., Li, Q., Shoemaker, B. A., Thiessen, P. A., Yu, B., Zaslavsky, L., Zhang, J., & Bolton, E. E. (2019). PubChem 2019 update: improved access to chemical data. Nucleic acids research, 47(D1), D1102–D1109. https://doi.org/10.1093/nar/gky1033
  property price 0.93 EUR2005
    Calculated value based on data from United Nations Commodity Trade Statistics Database (comtrade.un.org). UN comtrade category: 291010 Oxirane (ethylene oxide). Year 2005. Using exchange rate of 1EURO = 1.209 USD. Average of price of import into 5 main markets (EU, US, JP, IN and CN).
  properties: carbon allocation 0.545455 kg, carbon content 0.545455, carbon content, fossil 0.545455, carbon content, non-fossil 0, dry mass 1 kg, water content 0, water in wet mass 0 kg, wet mass 1 kg

## Inputs from technosphere
- chemical factory, organics: 4e-10 unit; lognormal variance with pedigree 0.0527, pedigree (2,2,5,5,1)
  EcoSpold01Location=RER
  Infrastructure of a typical plant
  Uncertainty: infrastructure of a typical plant
- electricity, medium voltage: 0.0752007, 0.023465, 0.000698788, 0.00356551, 0.215294, 0.0117763 kWh (6 suppliers, which the file names only by identifier); sum of these 0.33 kWh; lognormal variance with pedigree 0.0601, pedigree (4,2,5,5,1)
  Electricity
  EcoSpold01Location=UCTE
  Uncertainty: electricity
- ethylene: 0.811972, 0.0130279 kg (2 suppliers, which the file names only by identifier); sum of these 0.825 kg; lognormal variance with pedigree 0.0527, pedigree (2,2,5,5,1)
  EcoSpold01Location=RER
  Precursor
  Uncertainty: precursor
  properties: carbon content, fossil 0.857143, dry mass 1 kg, heating value, net 43.22 MJ, wet mass 1 kg
- oxygen, liquid: 0.463 kg; lognormal variance with pedigree 0.0527, pedigree (2,2,5,5,1)
  EcoSpold01Location=RER
  Precursor
  Uncertainty: precursor
  properties: dry mass 1 kg, wet mass 1 kg
- spent catalyst base from ethyleneoxide production: -0.0005 kg; lognormal variance with pedigree 0.0201, pedigree (4,2,1,5,1)
  EcoSpold01Location=CH
  Disposal of catalyst base
  Uncertainty: disposal of catalyst base
  production volume
    Calculated from the production volume of ethylene oxide in proportion to the respective output amounts.
  properties: dry mass 1 kg, wet mass 1 kg

## Inputs from nature
- Water, unspecified natural origin [natural resource, in water]: 0.000918239 m3; name water_UNO_input; source IPPC - Integrated Pollution Prevention a 2003; lognormal variance with pedigree 0.0546, pedigree (3,3,5,5,1)
  Calculated based on literature, (Vionnet, S., Quantis Water Database - Technical Report, 2012).
  property carbon content, fossil 0.0104329; name C_content_fossil
  property carbon content, non-fossil 0; name C_content_non_fossil
  property dry mass 0.1101 kg; name DM
  property water content 9081.65; name water_content
  property water in wet mass 999.89 kg; name WWM

## Emissions to nature
- Carbon dioxide, fossil [air, urban air close to ground]: 0.21 kg; lognormal variance with pedigree 0.0527, pedigree (2,2,5,5,1)
  Emissions
  Uncertainty: emissions
- Carbon monoxide, fossil [air, urban air close to ground]: 0.00011 kg; lognormal variance with pedigree 0.0527, pedigree (2,2,5,5,1)
  Emissions
  Uncertainty: emissions
- Ethylene [air, urban air close to ground]: 0.00023 kg; lognormal variance with pedigree 0.0527, pedigree (2,2,5,5,1)
  Emissions
  Uncertainty: emissions
- Ethylene oxide [air, urban air close to ground]: 2e-5 kg; lognormal variance with pedigree 0.0527, pedigree (2,2,5,5,1)
  Emissions
  Uncertainty: emissions
- Methane, fossil [air, urban air close to ground]: 7.5e-5 kg; lognormal variance with pedigree 0.0527, pedigree (2,2,5,5,1)
  Emissions
  Uncertainty: emissions
- NMVOC, non-methane volatile organic compounds [air, urban air close to ground]: 0.00024 kg; lognormal variance with pedigree 0.0527, pedigree (2,2,5,5,1)
  Emissions
  Uncertainty: emissions
- Water [air, unspecified]: 0.000188239 m3; name water_to_air_unspecified; lognormal variance with pedigree 0.0827, pedigree (2,2,5,5,1)
  Calculated value based on literature values and expert opinion. See comments in the parametres' comment field.
  property fraction, origin: fresh water 0; name fraction_origin_fresh_water
  property fraction, origin: salt water 0; name fraction_origin_salt_water
  property fraction, origin: unspecified 1; name fraction_origin_unspecified
- BOD5, Biological Oxygen Demand [water, surface water]: 0.00019 kg; lognormal variance with pedigree 0.0527, pedigree (2,2,5,5,1)
  Emissions
  Uncertainty: emissions
- COD, Chemical Oxygen Demand [water, surface water]: 0.00019 kg; lognormal variance with pedigree 0.0527, pedigree (2,2,5,5,1)
  Emissions
  Uncertainty: emissions
- DOC, Dissolved Organic Carbon [water, surface water]: 0.0002 kg; lognormal variance with pedigree 0.0527, pedigree (2,2,5,5,1)
  Emissions
  Uncertainty: emissions
- TOC, Total Organic Carbon [water, surface water]: 0.0002 kg; lognormal variance with pedigree 0.0527, pedigree (2,2,5,5,1)
  Emissions
  Uncertainty: emissions
- Water [water, unspecified]: 0.00073 m3; name water_to_water_unspecified; lognormal variance with pedigree 0.0827, pedigree (2,2,5,5,1)
  (same comment as for Water)
  property fraction, origin: fresh water 0; name fraction_origin_fresh_water_Ww
  property fraction, origin: salt water 0; name fraction_origin_salt_water_Ww
  property fraction, origin: unspecified 1; name fraction_origin_unspecified_Ww

## Sampling procedure
see technology

## Extrapolations
see technology This dataset has been copied from an original dataset covering the geography RER. The uncertainty has been adjusted accordingly.

## Review by Heiko Kunst 2003-08-06
Passed.
