# treatment of inert waste, sanitary landfill

Dataset: EcoSpold 2, unit process
Geography: Europe without Switzerland
Time period: 1994-01-01 to 2022-12-31
Technology level: current
Classification: ISIC rev.4 ecoinvent: 3821:Treatment and disposal of non-hazardous waste
Classification: EcoSpold01Categories: waste management/sanitary landfill
Tags: Treatment
Scenario: Business-as-Usual
System model: Allocation at the point of substitution
Generated by: [System]
Database: ecoinvent
isCopyrightProtected: true

## General comment
Inventoried waste contains 100% inert material (as cement); .
waste composition (wet, in ppm): H2O 5969.2; O 672760; H 66667; C n.a.; S 4938.4; N n.a.; P 231.96; B n.a.; Cl n.a.; Br n.a.; F n.a.; I n.a.; Ag n.a.; As 3.3957; Ba n.a.; Cd 0.60687; Co 1.7555; Cr 21.386; Cu 3.8614; Hg 0.017115; Mn 189.76; Mo n.a.; Ni 16.464; Pb 29.371; Sb 0.0881; Se n.a.; Sn 1.3293; V 23.132; Zn 80.532; Be n.a.; Sc n.a.; Sr n.a.; Ti n.a.; Tl 0.19256; W n.a.; Si 38427; Fe 10046; Ca 183060; Al 13408; K n.a.; Mg n.a.; Na 4115.3;
Share of carbon in waste that is biogenic 60.4%.
Overall degradability of waste during 100 years: 0%.

## Included activities end
Waste-specific short-term emissions to air via landfill gas incineration and landfill leachate. Burdens from treatment of short-term leachate (0-100a) in wastewater treatment plant (including WWTP sludge disposal in municipal incinerator). Long-term emissions from landfill to groundwater (after base lining failure).

## Technology
Swiss municipal sanitary landfill for biogenic or untreated municipal waste ('reactive organic landfill'). Landfill gas and leachate collection system. Recultivation and monitoring for 150 years after closure.

## Reference product
- inert waste: -1 kg; name RP; By-product classification Waste; CPC 39: Wastes or scraps
  production volume 1.23641e10 kg
    Estimated value. The europe without Switzerland production volume is extrapolated from the global production volume using the nominal GDP of 2010 (source: United Nations, http://data.un.org/Glossary.aspx?q=GDP+%28current+US%24%29, accessed 20130726 and 20130312).
    Comment from GLO dataset: Gross domestic product (GDP) at current prices is GDP at prices of the current reporting period. Also known as nominal GDP.The global total production of C&D waste is estimated to be 325 million tonnes in 2003 (http://www3.epa.gov/epawaste/inforesources/pubs/infocus/rif-cd.pdf, accessed 20151013). To calculate the share that is redirected to inert material landfill, sanitary landfill and recycling the weighted average (based on nominal GDP, source: United Nations, http://data.un.org/Glossary.aspx?q=GDP+%28current+US%24%29, accessed 20130726 and 20130312) of treatments in EU (GDP2005 0.330592), Honk Kong (GDP2005 0.003972) and Northeast America (GDP2005 0.274857) is calculated. Honk Kong’s Environmental protection department reports 95% of construction waste to inert material landfill and 5% to landfill (Statistic unit, 2013) (https://www.wastereduction.gov.hk/sites/default/files/msw2013.pdf, accessed 20151013). US Northeast Waste Management Officials’ Association reports 70% of waste going to inert material landfill and 30% to landfill (2009) (http://www.newmoa.org/solidwaste/CDReport2006DataFinalJune302009.pdf, accessed 20151013). For the EU, treatments vary greatly between states (recycling varies from less than 10% to over 90%) as an average 90% of waste is sent to inert material landfill and 10% to recycling. The weighted average of these regions result in 81% of waste sent to inert material landfill, 14% to sanitary landfill and 5% to recycling. No dataset for recycling is available at the moment.
  property price 0 EUR2005
    Waste products are assigned a price of zero as they are assumed to require further treatment.
  properties: carbon allocation 0 kg, carbon content 0, carbon content, fossil 0, carbon content, non-fossil 0, dry mass 1 kg, water content 0, water in wet mass 0 kg, wet mass 1 kg

## Inputs from technosphere
- electricity, low voltage: 7e-5 kWh; lognormal variance with pedigree 0.2106, pedigree (5,5,5,5,5)
  burden from wastewater treatment of the short-term leachate (0-100a). Uncertainty calculated from unertainty of the waste composition of this waste, uncertainty in waste decomposition and short-term leaching in sanitary landfill
- heat, central or small-scale, other than natural gas: 3.2524e-5 MJ; lognormal variance with pedigree 0.2106, pedigree (5,5,5,5,5)
  (same comment as for electricity, low voltage)
  properties: heating value, net 1 MJ
- heat, district or industrial, natural gas: 4.4928e-5 MJ; lognormal variance with pedigree 0.2106, pedigree (5,5,5,5,5)
  (same comment as for electricity, low voltage)
  properties: heating value, net 1 MJ
- process-specific burdens, sanitary landfill: 1 kg; lognormal variance with pedigree 0.042, pedigree (1,1,5,5,1)
  demands per kilogram waste. uncertainty is heeded in the module
- sanitary landfill facility: 5.56e-10 unit; lognormal variance with pedigree 0.042, pedigree (1,1,5,5,1)
  demands per kilogram waste. uncertainty is heeded in the module
- sewer grid, 5E9l/year, 110 km: 5.45e-10 km; lognormal variance with pedigree 0.2106, pedigree (5,5,5,5,5)
  (same comment as for electricity, low voltage)
- waste graphical paper: -3.88e-5 kg; name waste_gpaper; lognormal variance with pedigree 0.2106, pedigree (5,5,5,5,5)
  (same comment as for electricity, low voltage)
  production volume
    Calculated from the production volume of inert waste, 0% water in proportion to the respective output amounts.
  properties: carbon content, non-fossil 0.454955, dry mass 0.888 kg, heating value, net 14.12 MJ, water content 0.126126, wet mass 1 kg
  note on heating value, net: Value taken from the general comment of the treatment dataset.
- waste plastic, mixture: -3.88e-5 kg; name waste_plastic; lognormal variance with pedigree 0.2106, pedigree (5,5,5,5,5)
  (same comment as for electricity, low voltage)
  production volume
    (same comment as for waste graphical paper)
  properties: carbon content, fossil 0.747344, dry mass 0.847 kg, heating value, net 30.79 MJ, water content 0.180638, wet mass 1 kg
  note on carbon content, fossil: C content in 1 kg DM was calculated using data in Tab A.2, ecoinvent v2.2 report 13_I
- wastewater treatment facility, capacity 5E9l/year: 1.42e-11 unit; lognormal variance with pedigree 0.2106, pedigree (5,5,5,5,5)
  (same comment as for electricity, low voltage)

## Emissions to nature
- Aluminium III [water, ground-, long-term]: 0.0134 kg; lognormal variance with pedigree 0.372, pedigree (1,1,5,5,1)
  Emissions from long-term leachate (>100a) directly from MSW landfill and indirectly via incineration of treatement sludge from leachate treatement. Uncertainty calculated depending on waste input and uncertainty of long-term transfer coefficents in landfill.
- Antimony ion [water, ground-, long-term]: 8.84e-9 kg; lognormal variance with pedigree 3.292, pedigree (1,1,5,5,1)
  (same comment as for Aluminium III)
- Arsenic ion [water, ground-, long-term]: 3.4e-6 kg; lognormal variance with pedigree 1.462, pedigree (1,1,5,5,1)
  (same comment as for Aluminium III)
- Cadmium II [water, ground-, long-term]: 6.07e-7 kg; lognormal variance with pedigree 1.672, pedigree (1,1,5,5,1)
  (same comment as for Aluminium III)
- Calcium II [water, ground-, long-term]: 0.183 kg; lognormal variance with pedigree 0.112, pedigree (1,1,5,5,1)
  (same comment as for Aluminium III)
- Chromium VI [water, ground-, long-term]: 9.69e-8 kg; lognormal variance with pedigree 8.492, pedigree (1,1,5,5,1)
  (same comment as for Aluminium III)
- Cobalt II [water, ground-, long-term]: 1.76e-6 kg; lognormal variance with pedigree 1.532, pedigree (1,1,5,5,1)
  (same comment as for Aluminium III)
- Copper ion [water, ground-, long-term]: 3.86e-6 kg; lognormal variance with pedigree 1.432, pedigree (1,1,5,5,1)
  (same comment as for Aluminium III)
- Hydrogen sulfide [water, ground-, long-term]: 0.00036 kg; lognormal variance with pedigree 0.492, pedigree (1,1,5,5,1)
  (same comment as for Aluminium III)
- Iron ion [water, ground-, long-term]: 0.000704 kg; lognormal variance with pedigree 2.182, pedigree (1,1,5,5,1)
  (same comment as for Aluminium III)
- Lead II [water, ground-, long-term]: 2.94e-5 kg; lognormal variance with pedigree 1.162, pedigree (1,1,5,5,1)
  (same comment as for Aluminium III)
- Manganese II [water, ground-, long-term]: 0.000186 kg; lognormal variance with pedigree 0.922, pedigree (1,1,5,5,1)
  (same comment as for Aluminium III)
- Mercury II [water, ground-, long-term]: 1.71e-8 kg; lognormal variance with pedigree 1.962, pedigree (1,1,5,5,1)
  (same comment as for Aluminium III)
- Nickel II [water, ground-, long-term]: 1.65e-5 kg; lognormal variance with pedigree 1.242, pedigree (1,1,5,5,1)
  (same comment as for Aluminium III)
- Phosphate [water, ground-, long-term]: 4.81e-6 kg; lognormal variance with pedigree 7.142, pedigree (1,1,5,5,1)
  (same comment as for Aluminium III)
- Silicon [water, ground-, long-term]: 0.000735 kg; lognormal variance with pedigree 4.172, pedigree (1,1,5,5,1)
  (same comment as for Aluminium III)
- Sodium I [water, ground-, long-term]: 0.00412 kg; lognormal variance with pedigree 0.522, pedigree (1,1,5,5,1)
  (same comment as for Aluminium III)
- Sulfate [water, ground-, long-term]: 0.0138 kg; lognormal variance with pedigree 0.492, pedigree (1,1,5,5,1)
  (same comment as for Aluminium III)
- Thallium I [water, ground-, long-term]: 1.93e-7 kg; lognormal variance with pedigree 1.822, pedigree (1,1,5,5,1)
  (same comment as for Aluminium III)
- Tin ion [water, ground-, long-term]: 1.33e-6 kg; lognormal variance with pedigree 1.572, pedigree (1,1,5,5,1)
  (same comment as for Aluminium III)
- Vanadium V [water, ground-, long-term]: 6.74e-6 kg; lognormal variance with pedigree 1.572, pedigree (1,1,5,5,1)
  (same comment as for Aluminium III)
- Zinc II [water, ground-, long-term]: 6.65e-5 kg; lognormal variance with pedigree 1.042, pedigree (1,1,5,5,1)
  (same comment as for Aluminium III)

## Sampling procedure
Landfill model based on observed leachate concentrations in literature. Extrapolated to 60'000 years heeding chemical characteristics. Initial waste composition from various literature sources.

## Extrapolations
This dataset has been copied from an original dataset covering the geography CH. The uncertainty has been adjusted accordingly.
