# treatment of hard coal ash, residual material landfill

Dataset: EcoSpold 2, unit process
Geography: PT
Time period: 1994-01-01 to 2022-12-31
Technology level: current
Classification: EcoSpold01Categories: waste management/residual material landfill
Classification: ISIC rev.4 ecoinvent: 3822:Treatment and disposal of hazardous waste
Tags: Treatment; ConvertedDataset
Scenario: Business-as-Usual
System model: Allocation at the point of substitution
Generated by: Gabor Doka (obsolete)
Published in: Doka G. 2009
Database: ecoinvent
isCopyrightProtected: true

## General comment
Inventoried waste contains 100% PT hard coal ash; .
waste composition (wet, in ppm): H2O n.a.; O 545990; H n.a.; C n.a.; S 3030.3; N n.a.; P 1086.2; B 216.67; Cl 19.192; Br 39.025; F 76.738; I 2.6502; Ag n.a.; As 17.351; Ba 1181; Cd 1.0054; Co 27.7; Cr 139.98; Cu 60.764; Hg 0.090897; Mn 319.62; Mo 12.646; Ni 87.908; Pb 43.526; Sb 3.2289; Se 17.283; Sn 37.252; V 158.97; Zn 93.275; Be 10.748; Sc 53.368; Sr 982.63; Ti 7280.6; Tl 6.2659; W 16.593; Si 185480; Fe 51452; Ca 14258; Al 124700; K 15044; Mg 41058; Na 6984.1;
Share of carbon in waste that is biogenic 60.4%.

[This dataset was already contained in the ecoinvent database version 2. It was not individually updated during the transfer to ecoinvent version 3. Life Cycle Impact Assessment results may still have changed, as they are affected by changes in the supply chain, i.e. in other datasets. This dataset was generated following the ecoinvent quality guidelines for version 2. It may have been subject to central changes described in the ecoinvent version 3 change report (http://www.ecoinvent.org/database/ecoinvent-version-3/reports-of-changes/), and the results of the central updates were reviewed extensively. The changes added e.g. consistent water flows and other information throughout the database. The documentation of this dataset can be found in the ecoinvent reports of version 2, which are still available via the ecoinvent website. The change report linked above covers all central changes that were made during the conversion process.]

## Included activities end
Waste-specific short-term emissions to water from leachate. Long-term emissions from landfill to ground water.

## Geography
Technology encountered in Switzerland in 2000. Landfill includes base seal and leachate collection system.

## Technology
Swiss residual material landfill for polluted, inorganic waste. With base seal and leachate collection system. Recultivation after closure.

## Time period
Waste composition as given in literature reference, theoretical data or other source. Transfer coefficients from prospective model.

## Reference product
- hard coal ash: -1 kg; By-product classification Waste; CPC 39: Wastes or scraps
  EcoSpold01Location=PT
  production volume 3.14899e7 kg
    Estimated. Energy prodcution in mainly responsible for hard coal ashes. The production volume is calculated as the sum of hard coal ashes resulting from electricity and heat and power co-generation production from hard coal in the respective country.
  property price 0 EUR2005
    Waste products are assigned a price of zero as they are assumed to require further treatment.
  properties: carbon allocation 0 kg, carbon content 0, carbon content, fossil 0, carbon content, non-fossil 0, dry mass 1 kg, water content 0, water in wet mass 0 kg, wet mass 1 kg

## Inputs from technosphere
- process-specific burdens, residual material landfill: 1 kg; lognormal variance with pedigree 0.04, pedigree (1,1,5,1,1)
  demands per kilogram waste. uncertainty is heeded in the module;activityLink introduced to establish a direct link to the corresponding regional supply of this product
  EcoSpold01Location=CH
- residual material landfill: 2.0833e-9 unit; lognormal variance with pedigree 0.04, pedigree (1,1,5,1,1)
  EcoSpold01Location=CH
  demands per kilogram waste. uncertainty is heeded in the module

## Emissions to nature
- Aluminium III [water, ground-, long-term]: 0.037018 kg; lognormal variance with pedigree 0.51, pedigree (1,1,5,1,1)
  uncertainty is calculated from uncertainties in waste composition and transfer coefficients in incinerator and landfills.
- Aluminium III [water, surface water]: 6.18e-5 kg; lognormal variance with pedigree 0.89, pedigree (1,1,5,1,1)
  uncertainty is calculated from uncertainties in waste composition and transfer coefficients in residual landfill
- Antimony ion [water, ground-, long-term]: 2.0902e-6 kg; lognormal variance with pedigree 1.46, pedigree (1,1,5,1,1)
  (same comment as for Aluminium III)
- Antimony ion [water, surface water]: 1.1387e-6 kg; lognormal variance with pedigree 1.49, pedigree (1,1,5,1,1)
  (same comment as for Aluminium III)
- Arsenic ion [water, ground-, long-term]: 1.7351e-14 kg; lognormal variance with pedigree 1.26, pedigree (1,1,5,1,1)
  (same comment as for Aluminium III)
- Arsenic ion [water, surface water]: 1.7351e-5 kg; lognormal variance with pedigree 1.23, pedigree (1,1,5,1,1)
  (same comment as for Aluminium III)
- Barium II [water, ground-, long-term]: 9.7555e-6 kg; lognormal variance with pedigree 6.43, pedigree (1,1,5,1,1)
  (same comment as for Aluminium III)
- Barium II [water, surface water]: 1.6286e-8 kg; lognormal variance with pedigree 1.89, pedigree (1,1,5,1,1)
  (same comment as for Aluminium III)
- Beryllium II [water, ground-, long-term]: 3.8911e-6 kg; lognormal variance with pedigree 1.56, pedigree (1,1,5,1,1)
  (same comment as for Aluminium III)
- Beryllium II [water, surface water]: 6.496e-9 kg; lognormal variance with pedigree 2.02, pedigree (1,1,5,1,1)
  (same comment as for Aluminium III)
- Boron [water, ground-, long-term]: 0.00021304 kg; lognormal variance with pedigree 0.9, pedigree (1,1,5,1,1)
  (same comment as for Aluminium III)
- Boron [water, surface water]: 1.6976e-6 kg; lognormal variance with pedigree 1.29, pedigree (1,1,5,1,1)
  (same comment as for Aluminium III)
- Bromine [water, ground-, long-term]: 7.6762e-6 kg; lognormal variance with pedigree 1.14, pedigree (1,1,5,1,1)
  (same comment as for Aluminium III)
- Bromine [water, surface water]: 3.1349e-5 kg; lognormal variance with pedigree 1.13, pedigree (1,1,5,1,1)
  (same comment as for Aluminium III)
- Cadmium II [water, ground-, long-term]: 6.8257e-9 kg; lognormal variance with pedigree 7.84, pedigree (1,1,5,1,1)
  (same comment as for Aluminium III)
- Cadmium II [water, surface water]: 1.1395e-11 kg; lognormal variance with pedigree 2.85, pedigree (1,1,5,1,1)
  (same comment as for Aluminium III)
- Calcium II [water, ground-, long-term]: 0.0012884 kg; lognormal variance with pedigree 1.81, pedigree (1,1,5,1,1)
  (same comment as for Aluminium III)
- Calcium II [water, surface water]: 2.1509e-6 kg; lognormal variance with pedigree 1.27, pedigree (1,1,5,1,1)
  (same comment as for Aluminium III)
- Chloride [water, ground-, long-term]: 1.3703e-5 kg; lognormal variance with pedigree 1.23, pedigree (1,1,5,1,1)
  (same comment as for Aluminium III)
- Chloride [water, surface water]: 5.4892e-6 kg; lognormal variance with pedigree 1.26, pedigree (1,1,5,1,1)
  (same comment as for Aluminium III)
- Chromium VI [water, ground-, long-term]: 2.6581e-5 kg; lognormal variance with pedigree 0.96, pedigree (1,1,5,1,1)
  (same comment as for Aluminium III)
- Chromium VI [water, surface water]: 8.4147e-6 kg; lognormal variance with pedigree 1.12, pedigree (1,1,5,1,1)
  (same comment as for Aluminium III)
- Cobalt II [water, ground-, long-term]: 4.7357e-6 kg; lognormal variance with pedigree 1.95, pedigree (1,1,5,1,1)
  (same comment as for Aluminium III)
- Cobalt II [water, surface water]: 7.906e-9 kg; lognormal variance with pedigree 1.99, pedigree (1,1,5,1,1)
  (same comment as for Aluminium III)
- Copper ion [water, ground-, long-term]: 2.3391e-6 kg; lognormal variance with pedigree 3.72, pedigree (1,1,5,1,1)
  (same comment as for Aluminium III)
- Copper ion [water, surface water]: 3.9049e-9 kg; lognormal variance with pedigree 2.08, pedigree (1,1,5,1,1)
  (same comment as for Aluminium III)
- Fluoride [water, ground-, long-term]: 7.258e-5 kg; lognormal variance with pedigree 1.04, pedigree (1,1,5,1,1)
  (same comment as for Aluminium III)
- Fluoride [water, surface water]: 4.1586e-6 kg; lognormal variance with pedigree 1.21, pedigree (1,1,5,1,1)
  (same comment as for Aluminium III)
- Iodide [water, ground-, long-term]: 2.6502e-13 kg; lognormal variance with pedigree 1.51, pedigree (1,1,5,1,1)
  (same comment as for Aluminium III)
- Iodide [water, surface water]: 2.6502e-6 kg; lognormal variance with pedigree 1.48, pedigree (1,1,5,1,1)
  (same comment as for Aluminium III)
- Iron ion [water, ground-, long-term]: 0.00025788 kg; lognormal variance with pedigree 7.24, pedigree (1,1,5,1,1)
  (same comment as for Aluminium III)
- Iron ion [water, surface water]: 4.3051e-7 kg; lognormal variance with pedigree 1.51, pedigree (1,1,5,1,1)
  (same comment as for Aluminium III)
- Lead II [water, ground-, long-term]: 2.2577e-7 kg; lognormal variance with pedigree 8.03, pedigree (1,1,5,1,1)
  (same comment as for Aluminium III)
- Lead II [water, surface water]: 3.7691e-10 kg; lognormal variance with pedigree 2.39, pedigree (1,1,5,1,1)
  (same comment as for Aluminium III)
- Magnesium [water, ground-, long-term]: 0.0046651 kg; lognormal variance with pedigree 1.43, pedigree (1,1,5,1,1)
  (same comment as for Aluminium III)
- Magnesium [water, surface water]: 7.7882e-6 kg; lognormal variance with pedigree 1.12, pedigree (1,1,5,1,1)
  (same comment as for Aluminium III)
- Manganese II [water, ground-, long-term]: 2.6401e-6 kg; lognormal variance with pedigree 6.6, pedigree (1,1,5,1,1)
  (same comment as for Aluminium III)
- Manganese II [water, surface water]: 4.4075e-9 kg; lognormal variance with pedigree 2.07, pedigree (1,1,5,1,1)
  (same comment as for Aluminium III)
- Mercury II [water, ground-, long-term]: 4.2905e-9 kg; lognormal variance with pedigree 4.29, pedigree (1,1,5,1,1)
  (same comment as for Aluminium III)
- Mercury II [water, surface water]: 7.1627e-12 kg; lognormal variance with pedigree 2.95, pedigree (1,1,5,1,1)
  (same comment as for Aluminium III)
- Molybdenum VI [water, ground-, long-term]: 5.8057e-8 kg; lognormal variance with pedigree 1.3, pedigree (1,1,5,1,1)
  (same comment as for Aluminium III)
- Molybdenum VI [water, surface water]: 1.2588e-5 kg; lognormal variance with pedigree 1.28, pedigree (1,1,5,1,1)
  (same comment as for Aluminium III)
- Nickel II [water, ground-, long-term]: 3.1826e-5 kg; lognormal variance with pedigree 1.28, pedigree (1,1,5,1,1)
  (same comment as for Aluminium III)
- Nickel II [water, surface water]: 5.3132e-8 kg; lognormal variance with pedigree 1.74, pedigree (1,1,5,1,1)
  (same comment as for Aluminium III)
- Phosphate [water, ground-, long-term]: 0.00074405 kg; lognormal variance with pedigree 1.25, pedigree (1,1,5,1,1)
  (same comment as for Aluminium III)
- Phosphate [water, surface water]: 1.2422e-6 kg; lognormal variance with pedigree 1.47, pedigree (1,1,5,1,1)
  (same comment as for Aluminium III)
- Potassium I [water, ground-, long-term]: 0.010804 kg; lognormal variance with pedigree 0.36, pedigree (1,1,5,1,1)
  (same comment as for Aluminium III)
- Potassium I [water, surface water]: 0.0042408 kg; lognormal variance with pedigree 0.4, pedigree (1,1,5,1,1)
  (same comment as for Aluminium III)
- Scandium [water, ground-, long-term]: 4.5836e-5 kg; lognormal variance with pedigree 1.09, pedigree (1,1,5,1,1)
  (same comment as for Aluminium III)
- Scandium [water, surface water]: 7.5318e-6 kg; lognormal variance with pedigree 1.18, pedigree (1,1,5,1,1)
  (same comment as for Aluminium III)
- Selenium IV [water, ground-, long-term]: 1.1188e-5 kg; lognormal variance with pedigree 1.24, pedigree (1,1,5,1,1)
  (same comment as for Aluminium III)
- Selenium IV [water, surface water]: 6.0949e-6 kg; lognormal variance with pedigree 1.27, pedigree (1,1,5,1,1)
  (same comment as for Aluminium III)
- Silicon [water, ground-, long-term]: 0.18507 kg; lognormal variance with pedigree 0.11, pedigree (1,1,5,1,1)
  (same comment as for Aluminium III)
- Silicon [water, surface water]: 0.00041714 kg; lognormal variance with pedigree 0.66, pedigree (1,1,5,1,1)
  (same comment as for Aluminium III)
- Sodium I [water, ground-, long-term]: 0.0043631 kg; lognormal variance with pedigree 0.46, pedigree (1,1,5,1,1)
  (same comment as for Aluminium III)
- Sodium I [water, surface water]: 0.002621 kg; lognormal variance with pedigree 0.48, pedigree (1,1,5,1,1)
  (same comment as for Aluminium III)
- Strontium [water, ground-, long-term]: 0.00035575 kg; lognormal variance with pedigree 0.96, pedigree (1,1,5,1,1)
  (same comment as for Aluminium III)
- Strontium [water, surface water]: 5.9391e-7 kg; lognormal variance with pedigree 1.42, pedigree (1,1,5,1,1)
  (same comment as for Aluminium III)
- Sulfate [water, ground-, long-term]: 0.0081156 kg; lognormal variance with pedigree 0.55, pedigree (1,1,5,1,1)
  (same comment as for Aluminium III)
- Sulfate [water, surface water]: 0.00097535 kg; lognormal variance with pedigree 0.67, pedigree (1,1,5,1,1)
  (same comment as for Aluminium III)
- Thallium I [water, ground-, long-term]: 2.2685e-6 kg; lognormal variance with pedigree 1.63, pedigree (1,1,5,1,1)
  (same comment as for Aluminium III)
- Thallium I [water, surface water]: 3.7871e-9 kg; lognormal variance with pedigree 2.09, pedigree (1,1,5,1,1)
  (same comment as for Aluminium III)
- Tin ion [water, ground-, long-term]: 7.0591e-7 kg; lognormal variance with pedigree 5.07, pedigree (1,1,5,1,1)
  (same comment as for Aluminium III)
- Tin ion [water, surface water]: 1.1785e-9 kg; lognormal variance with pedigree 2.24, pedigree (1,1,5,1,1)
  (same comment as for Aluminium III)
- Titanium ion [water, ground-, long-term]: 0.0021613 kg; lognormal variance with pedigree 0.81, pedigree (1,1,5,1,1)
  (same comment as for Aluminium III)
- Titanium ion [water, surface water]: 3.6081e-6 kg; lognormal variance with pedigree 1.19, pedigree (1,1,5,1,1)
  (same comment as for Aluminium III)
- Tungsten [water, ground-, long-term]: 1.0741e-5 kg; lognormal variance with pedigree 1.25, pedigree (1,1,5,1,1)
  (same comment as for Aluminium III)
- Tungsten [water, surface water]: 5.8516e-6 kg; lognormal variance with pedigree 1.27, pedigree (1,1,5,1,1)
  (same comment as for Aluminium III)
- Vanadium V [water, ground-, long-term]: 0.00012219 kg; lognormal variance with pedigree 0.96, pedigree (1,1,5,1,1)
  (same comment as for Aluminium III)
- Vanadium V [water, surface water]: 3.9015e-7 kg; lognormal variance with pedigree 1.48, pedigree (1,1,5,1,1)
  (same comment as for Aluminium III)
- Zinc II [water, ground-, long-term]: 1.1432e-6 kg; lognormal variance with pedigree 5.86, pedigree (1,1,5,1,1)
  (same comment as for Aluminium III)
- Zinc II [water, surface water]: 1.9085e-9 kg; lognormal variance with pedigree 2.18, pedigree (1,1,5,1,1)
  (same comment as for Aluminium III)

## Sampling procedure
Landfill model based on observed leachate concentrations in literature. Extrapolated to 60'000 years heeding chemical characteristics. Initial waste composition from various literature sources.

## Review by Niels Jungbluth 2009-02-15
passed.
