# treatment of wastewater from lorry production, wastewater treatment, urban

Dataset: EcoSpold 2, unit process
Geography: CH
Time period: 2010-01-01 to 2022-12-31
Technology level: current
Classification: ISIC rev.4 ecoinvent: 3700:Sewerage
Scenario: Business-as-Usual
System model: Allocation at the point of substitution
Generated by: Nikolia Stoikou
Database: ecoinvent
isCopyrightProtected: true

## General comment
This dataset represents the treatment of a wastewater, generated from an ordinary transforming activity. Purification in wastewater treatment of 'wastewater from lorry production'. Recommended use of this dataset: to be used for wastewaters, generated from ordinary transforming activities, of equal or similar composition. The wastewater has a content of TOC: 0 kg/m3, COD: 0 kg/m3 and BOD: 0 kg/m3. TOC is equal to C present in the wastewater, COD is calculated as TOC/0.2565 and BOD is calculated as COD/0.53034. Detailed elemental composition can be found in the properties of the wastewater treated. Share of biogenic carbon in the sludge: 0%.

## Included activities start
The activity starts with the wastewater being available at the gate of the treatment facility. Collection and transportation of the wastewater to the treatment plant is not included.

## Included activities end
The activity ends with the wastewater being treated and waste-specific emissions released to the environment. Expenditures from treatment of wastewater in waste treatment plant are included as well as relevant infrastructure of the plant. Emissions from any sludge digestion, biogas generation and utilization (heeding specific wastewater composition) are also included. Waste-specific direct emissions of untreated wastewater and required territory-specific infrastructure for sewers are not contained within this dataset but instead in the regional market datasets for this wastewater.

## Geography
The site has mean annual temperature (MAT) of 9.5 degC, mean annual precipitation (MAP) of 1483.00559816076 mm/year, mean annual actual evaporation (EAT) of 528.63778611689 mm/year. In the WWT plant, 0% of its water input are lost due to evaporation from pools, 0% of water is *gained* from organic mass degradation, and 0.000168% is removed off site via sludge disposal. (References: UN data, 2020. Precipitation, Environment Statistics Database, United Nations Statistics Division Available at: http://data.un.org/Data.aspx?q=precipitation&d=ENV&f=variableID%3a6; World Bank, 2022. Surface area (sq.km), World Bank Group Available at: https://data.worldbank.org/indicator/AG.SRF.TOTL.K2; MeteoSwiss, 2022. Data on Swiss temperature mean, Federal Department of Home Affairs FDHA. Federal Office of Meteorology and Climatology. Swiss Climate Available at: https://www.MeteoSwiss.admin.ch/home/climate/swiss-climate-in-detail/Swiss-temperature-mean/Data-on-the-Swiss-temperature-mean.html?query=TEMPERATURE+DATA&topic=/content/MeteoSwiss/tags/topics/klima&pageIndex=0&tab=search_tab; Doka G.,2021. A model for composition-specific life cycle inventories of regionalised wastewater fates, Zurich, Switzerland. http://www.doka.ch/publications.htm)

## Technology
This activity represents the treatment of a specific wastewater in a WWT plant (while direct emissions and sewering are heeded in the upstream market dataset for this wastewater). The size of the treatment plant infrastructure is for a national average territory situation. The assumed size of the WWTP treats 90.6 Mio m3 per year. The mixture of WWTP with one, two, or three stages is 0%-11.2%-88.8%. The actual, waste-specific oxygen requirement in the biological stages is 0kg O. Generated waste-specific raw sludge is treated with anaerobic digestion. The digestion process produces 0.0117 litres of biogas with an energy content of 0.0002165MJ. 23.6% of the biogas is utilized for energy. The remainder is flared. The gross electric efficiency is 26.564%. The gross thermal efficiency is 47.853%. After digestion, the remaining total sludge mass (dry matter) is 0.0008944kg DM.

## Reference product
- iron scrap, sorted, pressed: 1 kg; By-product classification Recyclable; CPC 39310: Slag, dross, scalings and other waste from the manufacture of iron or steel; lognormal variance with pedigree 0.3109, pedigree (1,1,1,1,1)
  scrap output from used infrastructure for wastewater treatment plant.
  Uncertainty: Uncertainty calculated from wastewater technosphere fate uncertainty and treatment infrastructure uncertainty.
  production volume 1.01202 kg
    Calculated in proportion to wastewater reference product.
  property price 0.175 EUR2005
    Temporary price data. Calculated as 90% of purchasers price based on: 2005 import and export prices (total trades (USD) divided by total weight (kg) in biggest economies of the world: EU27, USA, Brasil, China, India, Japan and Russia) from UN Commodity Trade Statistics Database (http://data.un.org/Explorer.aspxDatabase [Accessed 2011.06.20]). Commodity: Waste or scrap, of cast iron
  properties: carbon allocation 0 kg, carbon content 0, carbon content, fossil 0, carbon content, non-fossil 0, dry mass 1 kg, water content 0, water in wet mass 0 kg, wet mass 1 kg

## Inputs from technosphere
- acetic acid, without water, in 98% solution state: 1.87727e-7 kg
- acetylene: 3.33413e-6, 1.58275e-5 kg (2 suppliers, which the file names only by identifier); sum of these 1.91617e-5 kg
- alkyd paint, white, without solvent, in 60% solution state: 2.11351e-5, 9.30865e-5 kg (2 suppliers, which the file names only by identifier); sum of these 0.000114222 kg
- aluminium, cast alloy: 0.00117479 kg
- aluminium, wrought alloy: 0.000417136 kg
- brass: 5.6066e-5, 1.0071e-6 kg (2 suppliers, which the file names only by identifier); sum of these 5.70731e-5 kg
- cast iron: 0.0139757 kg
- copper, cathode: 0.000213058 kg
- diesel: 0.000470504, 4.50273e-6 kg (2 suppliers, which the file names only by identifier); sum of these 0.000475007 kg
- diesel, burned in building machine: 5.71714e-5 MJ
- electricity, medium voltage: 0.23848, 0.000127802 kWh (2 suppliers, which the file names only by identifier); sum of these 0.238608 kWh
- electronics, for control units: 0.000382992 kg
- flat glass, coated: 1.56006e-6 kg
- flat glass, uncoated: 0.00010938, 0.000523341 kg (2 suppliers, which the file names only by identifier); sum of these 0.000632721 kg
- heat, district or industrial, natural gas: 0.000870888, 0.408128 MJ (2 suppliers, which the file names only by identifier); sum of these 0.408998 MJ
- heat, district or industrial, other than natural gas: 2.32066e-5, 0.00242493 MJ (2 suppliers, which the file names only by identifier); sum of these 0.00244813 MJ
- hydrochloric acid, without water, in 30% solution state: 1.02303e-7, 4.35279e-7 kg (2 suppliers, which the file names only by identifier); sum of these 5.37582e-7 kg
- injection moulding: 0.00195228 kg
- lead: 0.000696158 kg
- lime, hydrated, packed: 8.66039e-7, 1.57096e-8 kg (2 suppliers, which the file names only by identifier); sum of these 8.81749e-7 kg
- lubricating oil: 0.000144517, 3.28976e-5 kg (2 suppliers, which the file names only by identifier); sum of these 0.000177414 kg
- nitric acid, without water, in 50% solution state: 6.00388e-9, 8.07617e-8, 8.92083e-9, 2.21845e-8, 2.88502e-8, 1.06296e-8, 3.65591e-8, 9.63816e-9, 8.88781e-9, 6.77328e-8 kg (10 suppliers, which the file names only by identifier); sum of these 2.80169e-7 kg
- oxygen, liquid: 9.90167e-6, 3.60863e-5 kg (2 suppliers, which the file names only by identifier); sum of these 4.5988e-5 kg
- pig iron: 0.000448861, 0.00420305 kg (2 suppliers, which the file names only by identifier); sum of these 0.00465191 kg
- pitch: 3.15744e-8, 1.4919e-7, 4.80225e-6, 2.12983e-7, 1.88155e-5, 7.35387e-8, 3.32835e-6, 1.29034e-6 kg (8 suppliers, which the file names only by identifier); sum of these 2.87037e-5 kg
- polyethylene, high density, granulate: 0.000657993 kg
- polypropylene, granulate: 0.00224101 kg
- polyurethane, rigid foam: 0.00020178, 0.000408579 kg (2 suppliers, which the file names only by identifier); sum of these 0.000610359 kg
- powder coat, steel: 0.00055311 m2
- propylene glycol, liquid: 4.14916e-5, 2.13613e-5 kg (2 suppliers, which the file names only by identifier); sum of these 6.28529e-5 kg
- refrigerant R134a: 6.36761e-9 kg
- refrigeration machine, R134a as refrigerant: 2.53565e-6 unit
- refrigeration machine, carbon dioxide, liquid as refrigerant: 2.81742e-7 unit
- reinforcing steel: 0.00646923 kg
- road vehicle factory: 2.1527e-14, 5.8052e-12 unit (2 suppliers, which the file names only by identifier); sum of these 5.82673e-12 unit
- scrap copper: -1.89181e-6, -4.03219e-5, -8.49014e-5 kg (3 suppliers, which the file names only by identifier); sum of these -0.000127115 kg
- scrap lead acid battery: -0.000486705 kg
- scrap steel: -2.89986e-5, -0.0710815, -0.0228882 kg (3 suppliers, which the file names only by identifier); sum of these -0.0939987 kg
- section bar rolling, steel: 5.95645e-5, 0.00459234 kg (2 suppliers, which the file names only by identifier); sum of these 0.00465191 kg
- sheet rolling, steel: 1.67736e-5, 0.00117767 kg (2 suppliers, which the file names only by identifier); sum of these 0.00119444 kg
- sodium hydroxide, without water, in 50% solution state: 1.0837e-6 kg
- steel, chromium steel 18/8, hot rolled: 0.00619743 kg
- steel, low-alloyed: 0.0694146 kg
- steel, low-alloyed, hot rolled: 0.0184358 kg
- stone wool, packed: 2.97926e-5 kg
- sulfuric acid: 6.95116e-5, 9.86524e-6 kg (2 suppliers, which the file names only by identifier); sum of these 7.93768e-5 kg
- synthetic rubber: 0.0052055 kg
- tap water: 0.202453, 0.000442185 kg (2 suppliers, which the file names only by identifier); sum of these 0.202895 kg
- tempering, flat glass: 1.56006e-6 kg
- used bus: -3.1838e-9 unit
- used lorry with refrigeration machine, 16 metric ton: -2.81739e-6 unit
- used lorry, 16 metric ton: -1.15058e-8 unit
- used lorry, 28 metric ton: -7.67054e-9 unit
- used lorry, 40 metric ton: -4.60232e-9 unit
- waste aluminium: -0.000973172 kg
- waste bulk iron, excluding reinforcement: -0.00659276, -0.00317043, -8.28732e-5 kg (3 suppliers, which the file names only by identifier); sum of these -0.00984606 kg
- waste electric and electronic equipment: -0.000297396 kg
- waste glass sheet: -0.000103371, -2.63182e-6, -0.000398326 kg (3 suppliers, which the file names only by identifier); sum of these -0.000504329 kg
- waste polypropylene: -2.87439e-6, -0.000223444, -1.30279e-6, -0.00180485, -7.11504e-6, -1.72262e-5, -6.75639e-6, -0.000257815 kg (8 suppliers, which the file names only by identifier); sum of these -0.00232138 kg
- waste polyurethane foam: -6.09881e-5, -4.7838e-8 kg (2 suppliers, which the file names only by identifier); sum of these -6.10359e-5 kg
- waste rubber, unspecified: -8.49938e-5, -0.00202464, -0.00202464 kg (3 suppliers, which the file names only by identifier); sum of these -0.00413426 kg
- wastewater from lorry production: -1.866e-7, -2.6432e-5 m3 (2 suppliers, which the file names only by identifier); sum of these -2.66186e-5 m3
- wastewater, average: -9.78536e-7, -5.7352e-7, -0.000161084, -3.89367e-5 m3 (4 suppliers, which the file names only by identifier); sum of these -0.000201573 m3
- water, completely softened: 2.35439e-5, 3.27562e-5, 4.37594e-5 kg (3 suppliers, which the file names only by identifier); sum of these 0.000100059 kg
- wire drawing, copper: 1.42152e-6, 0.000211637 kg (2 suppliers, which the file names only by identifier); sum of these 0.000213058 kg
- wire drawing, steel: 0.00462576 kg
- zinc coat, coils: 0.000204806 m2

## Inputs from nature
- Water, well, in ground [natural resource, in water]: 0.000197682 m3

## Emissions to nature
- Ammonia [air, unspecified]: 6.3429e-8 kg
- Benzene [air, unspecified]: 3.7261e-8 kg
- Cadmium II [air, unspecified]: 4.92073e-12 kg
- Carbon dioxide, fossil [air, non-urban air or from high stacks]: 6.48548e-5 kg
- Carbon dioxide, fossil [air, unspecified]: 0.00180047 kg
- Carbon monoxide, fossil [air, unspecified]: 2.76755e-6 kg
- Chromium III [air, unspecified]: 8.33395e-10 kg
- Copper ion [air, unspecified]: 8.33395e-10 kg
- Dinitrogen monoxide [air, unspecified]: 6.3429e-8 kg
- Lead II [air, unspecified]: 5.40427e-14 kg
- Mercury II [air, unspecified]: 9.81301e-15 kg
- Methane, fossil [air, unspecified]: 4.69318e-8 kg
- NMVOC, non-methane volatile organic compounds [air, unspecified]: 2.2385e-5 kg
- Nickel II [air, unspecified]: 3.44166e-11 kg
- Nitrogen oxides [air, unspecified]: 1.70661e-5 kg
- Particulate Matter, < 2.5 um [air, unspecified]: 7.22465e-7 kg
- Particulate Matter, > 10 um [air, unspecified]: 3.10034e-8 kg
- Particulate Matter, > 2.5 um and < 10um [air, unspecified]: 6.03002e-8 kg
- Selenium IV [air, unspecified]: 4.92073e-12 kg
- Sulfur dioxide [air, unspecified]: 3.41322e-7 kg
- Toluene [air, unspecified]: 1.56724e-8 kg
- Water [air, unspecified]: 3.66495e-5 m3
- Xylene [air, unspecified]: 1.56724e-8 kg
- Zinc II [air, unspecified]: 4.92073e-10 kg
- BOD5, Biological Oxygen Demand [water, unspecified]: 3.58388e-7 kg
- COD, Chemical Oxygen Demand [water, unspecified]: 3.58388e-7 kg
- DOC, Dissolved Organic Carbon [water, unspecified]: 1.56724e-7 kg
- TOC, Total Organic Carbon [water, unspecified]: 1.56724e-7 kg
- Water [water, unspecified]: 0.000156254 m3
