# treatment of waste asphalt, sanitary landfill

Dataset: EcoSpold 2, unit process
Geography: CH
Time period: 1994-01-01 to 2022-12-31
Technology level: current
Classification: EcoSpold01Categories: waste management/sanitary landfill
Classification: ISIC rev.4 ecoinvent: 3821:Treatment and disposal of non-hazardous waste
Synonyms: petroleum asphalt; mixture of approximately 5% bitumen and gravel; alphaltum; road tar
Tags: Treatment; ConvertedDataset
Scenario: Business-as-Usual
System model: Allocation at the point of substitution
Generated by: Gabor Doka (obsolete)
Published in: Doka G. 2007
Database: ecoinvent
isCopyrightProtected: true

## General comment
Inventoried waste contains 94.7% inert material; 5.3% bitumen; .
waste composition (wet, in ppm): upper heating value 2.194 MJ/kg; lower heating value 2.087 MJ/kg; H2O 718.68; O 505600; H 5300; C 44036; S 2120; N 265; P 0.212; B n.a.; Cl n.a.; Br n.a.; F n.a.; I n.a.; Ag n.a.; As 0.0371; Ba n.a.; Cd n.a.; Co 0.02279; Cr 0.01855; Cu 0.265; Hg 0.00106; Mn n.a.; Mo 0.02968; Ni 5.3; Pb 0.053; Sb n.a.; Se 0.0106; Sn 4.717; V 13.25; Zn n.a.; Be n.a.; Sc n.a.; Sr n.a.; Ti n.a.; Tl n.a.; W n.a.; Si 441930; Fe 3.975; Ca 0.318; Al 0.371; K n.a.; Mg n.a.; Na 1.855;
Share of carbon in waste that is biogenic 0%.
Overall degradability of waste during 100 years: 0.05%.
[This dataset was already contained in the ecoinvent database version 2. It was not individually updated during the transfer to ecoinvent version 3. Life Cycle Impact Assessment results may still have changed, as they are affected by changes in the supply chain, i.e. in other datasets. This dataset was generated following the ecoinvent quality guidelines for version 2. It may have been subject to central changes described in the ecoinvent version 3 change report (http://www.ecoinvent.org/database/ecoinvent-version-3/reports-of-changes/), and the results of the central updates were reviewed extensively. The changes added e.g. consistent water flows and other information throughout the database. The documentation of this dataset can be found in the ecoinvent reports of version 2, which are still available via the ecoinvent website. The change report linked above covers all central changes that were made during the conversion process.]

## Included activities end
Waste-specific short-term emissions to air via landfill gas incineration and landfill leachate. Burdens from treatment of short-term leachate (0-100a) in wastewater treatment plant (including WWTP sludge disposal in municipal incinerator). Long-term emissions from landfill to groundwater (after base lining failure).

## Geography
Technology encountered in Switzerland in 2000. Landfill includes base seal, leachate collection system, treatment of leachate in municipal wastewater treatment plant.

## Technology
Swiss municipal sanitary landfill for biogenic or untreated municipal waste ('reactive organic landfill'). Landfill gas and leachate collection system. Recultivation and monitoring for 150 years after closure.

## Reference product
- waste asphalt: -1 kg; name waste_asphalt_RP; By-product classification Waste; CPC 39: Wastes or scraps
  production volume 0.0336675 kg
    This is a placeholder value that does not reflect real-world production volumes. This dataset does not currently require a real-world production volume to work in the database framework, and no actual data were collected yet. This has no negative effect on the results of the ecoinvent database. The placeholder value of this activity was scaled according to the nominal GDP of 2005 (source: United Nations, http://data.un.org/Glossary.aspx?q=GDP+%28current+US%24%29, accessed 20130726) to reflect an appropriate share of the global production volume, which is also a placeholder value.
  property carbon content, fossil 0.0440796
    The waste contains 94.7% inert material (see Tab A.5 for details) 5.3% bitumen (see Tab A.6 for details), ecoinvent v2.2 report 13_I
  property heating value, net 0 MJ
    Non combustible products are assumed to have an LHV equal to zero (0).
  property price 0 EUR2005
    Waste products are assigned a price of zero as they are assumed to require further treatment.
  properties: carbon allocation 0.0440356 kg, carbon content 0.0440796, carbon content, non-fossil 0, dry mass 0.999 kg, water content 0.001001, water in wet mass 0.001 kg, wet mass 1 kg

## Inputs from technosphere
- aluminium sulfate, powder: 1.52e-10 kg; lognormal variance with pedigree 2.67, pedigree (5,5,5,5,5)
  burden from wastewater treatment of the short-term leachate (0-100a). Uncertainty calculated from unertainty of the waste composition of this waste, uncertainty in waste decomposition and short-term leaching in sanitary landfill
  properties: dry mass 1 kg, wet mass 1 kg
- ammonia, anhydrous, liquid: 9.31e-9 kg; lognormal variance with pedigree 0.9, pedigree (1,1,5,1,1)
  burden from incineration of sludge from wastewater treatment of the short-term leachate (0-100a). uncertainty is calculated from uncertainties in waste composition and transfer coefficients in incinerator and uncertainty of waste decomposition and short-term leaching in sanitary landfill
  properties: dry mass 1 kg, wet mass 1 kg
- cement, unspecified: 4.17e-9 kg; lognormal variance with pedigree 0.84, pedigree (1,1,5,1,1)
  (same comment as for ammonia, anhydrous, liquid)
  properties: dry mass 1 kg, wet mass 1 kg
- chemical, inorganic: 1.01e-12 kg; lognormal variance with pedigree 0.64, pedigree (1,1,5,1,1)
  (same comment as for ammonia, anhydrous, liquid)
  properties: carbon content, fossil 0.003, dry mass 1 kg, wet mass 1 kg
  note on carbon content, fossil: This dataset is an unweighted average of 20 inorganic substances (listed in Tab 88.1, ecoinvent v2.2 report 8, part II), being part of the top100 chemicals included in this database. The C-content has also been calculated as an unweighted average of the C content of the substances composing this dataset.
- chemical, organic: 1.55e-12 kg; lognormal variance with pedigree 2.69, pedigree (1,1,5,1,1)
  (same comment as for ammonia, anhydrous, liquid)
  properties: carbon content, fossil 0.628, dry mass 1 kg, heating value, net 19.03 MJ, wet mass 1 kg
  note on carbon content, fossil: This dataset is an unweighted average of 20 organic substances (listed in Tab 88.1, ecoinvent v2.2 report 8, part II), being part of the top100 chemicals included in this database. The C-content has also been calculated as an unweighted average of the C content of the substances composing this dataset.
- chromium oxide, flakes: 5.44e-12 kg; lognormal variance with pedigree 1.29, pedigree (5,5,5,5,5)
  burden from incineration of sludge from wastewater treatment of the short-term leachate (0-100a). Proxy for vanadium pentoxide V2O5 in SCR catalyst, uncertainty calculated from uncertainty in average DeNOx input, uncertainty in the share of thermal NOx, uncertainty of nitrogen content in average municipal waste and the unertainty in nitrogen content in *this* waste and uncertainty of waste decomposition and short-term leaching in sanitary landfill
  properties: dry mass 1 kg, wet mass 1 kg
- electricity, for reuse in municipal waste incineration only: 1.09e-6 kWh; name E_el_prod_MSWI; lognormal variance with pedigree 1.38, pedigree (1,1,5,1,1)
  (same comment as for ammonia, anhydrous, liquid)
- electricity, low voltage: 0.000109 kWh; lognormal variance with pedigree 0.34, pedigree (5,5,5,5,5)
  (same comment as for aluminium sulfate, powder)
- heat, central or small-scale, other than natural gas: 3.2806e-5 MJ; lognormal variance with pedigree 0.2106, pedigree (5,5,5,5,5)
  (same comment as for aluminium sulfate, powder)
  properties: heating value, net 1 MJ
- heat, district or industrial, natural gas: 4.60332e-5 MJ; lognormal variance with pedigree 1.07, pedigree (5,5,5,5,5)
  (same comment as for ammonia, anhydrous, liquid)
  properties: heating value, net 1 MJ
- heat, for reuse in municipal waste incineration only: 6.37e-6 MJ; name E_th_prod_MSWI; lognormal variance with pedigree 0.96, pedigree (1,1,5,1,1)
  (same comment as for ammonia, anhydrous, liquid)
- hydrochloric acid, without water, in 30% solution state: 6.03e-13 kg; lognormal variance with pedigree 0.64, pedigree (1,1,5,1,1)
  (same comment as for ammonia, anhydrous, liquid)
  properties: dry mass 1 kg, heating value, net 3.32 MJ, wet mass 1 kg
- iron (III) chloride, without water, in 40% solution state: 8.13e-10 kg; lognormal variance with pedigree 2.48, pedigree (1,1,5,1,1)
  (same comment as for ammonia, anhydrous, liquid)
  properties: dry mass 1 kg, wet mass 1 kg
- iron sulfate: 5.62e-10 kg; lognormal variance with pedigree 2.67, pedigree (5,5,5,5,5)
  (same comment as for aluminium sulfate, powder)
  properties: dry mass 1 kg, wet mass 1 kg
- municipal waste incineration facility: 1.9e-15 unit; lognormal variance with pedigree 0.96, pedigree (1,1,5,1,1)
  Burden from incineration of sludge from wastewater treatment of the short-term leachate (0-100a).
  Burden from incineration of sludge from wastewater treatment of the short-term leachate (0-100a).
- process-specific burdens, municipal waste incineration: 7.59e-6 kg; lognormal variance with pedigree 0.96, pedigree (1,1,5,1,1)
  Burden from incineration of sludge from wastewater treatment of the short-term leachate (0-100a).
  Burden from incineration of sludge from wastewater treatment of the short-term leachate (0-100a).;activityLink introduced to establish a direct link to the corresponding regional supply of this product
- process-specific burdens, residual material landfill: 1.04e-8 kg; lognormal variance with pedigree 0.83, pedigree (1,1,5,1,1)
  burden from incineration of sludge from wastewater treatment of the short-term leachate (0-100a). uncertainty is calculated from uncertainties in waste composition and transfer coefficients in incinerator and uncertainty of waste decomposition and short-term leaching in sanitary landfill;activityLink introduced to establish a direct link to the corresponding regional supply of this product
- process-specific burdens, sanitary landfill: 1 kg; lognormal variance with pedigree 0.04, pedigree (1,1,5,1,1)
  demands per kilogram waste. uncertainty is heeded in the module;activityLink introduced to establish a direct link to the corresponding regional supply of this product
- process-specific burdens, slag landfill: 4.08e-8 kg; lognormal variance with pedigree 0.71, pedigree (1,1,5,1,1)
  (same comment as for process-specific burdens, residual material landfill)
- quicklime, milled, packed: 8.39e-11 kg; lognormal variance with pedigree 0.82, pedigree (1,1,5,1,1)
  (same comment as for ammonia, anhydrous, liquid)
  properties: dry mass 0.99 kg, water content 0.010101, wet mass 1 kg
- residual material landfill: 2.17e-17 unit; lognormal variance with pedigree 0.83, pedigree (1,1,5,1,1)
  (same comment as for ammonia, anhydrous, liquid)
- sanitary landfill facility: 5.56e-10 unit; lognormal variance with pedigree 0.04, pedigree (1,1,5,1,1)
  demands per kilogram waste. uncertainty is heeded in the module
  This exchange has an activity link directly to the producing activity because the product is primarily consumed in the same geographical area where it is produced.
- sewer grid, 5E9l/year, 110 km: 5.45e-10 km; lognormal variance with pedigree 0.2106, pedigree (5,5,5,5,5)
  (same comment as for aluminium sulfate, powder)
- slag landfill: 7.25e-17 unit; lognormal variance with pedigree 0.71, pedigree (1,1,5,1,1)
  (same comment as for ammonia, anhydrous, liquid)
- sodium hydroxide, without water, in 50% solution state: 4.63e-10 kg; lognormal variance with pedigree 0.81, pedigree (1,1,5,1,1)
  (same comment as for ammonia, anhydrous, liquid)
  properties: dry mass 1 kg, heating value, net 3.03 MJ, wet mass 1 kg
- titanium dioxide: 2.66e-10 kg; lognormal variance with pedigree 1.17, pedigree (1,1,5,1,1)
  (same comment as for ammonia, anhydrous, liquid)
  properties: dry mass 1 kg, wet mass 1 kg
- waste cement, hydrated: -1.04e-8 kg; name ByP_01; lognormal variance with pedigree 0.8, pedigree (1,1,1,1,1)
  (same comment as for ammonia, anhydrous, liquid)
  production volume
    Calculated from the production volume of waste asphalt, 0.1% water in proportion to the respective output amounts.
  properties: dry mass 1 kg, wet mass 1 kg
- waste graphical paper: -3.88e-5 kg; name ByP_02; lognormal variance with pedigree 0.2106, pedigree (5,5,5,5,5)
  (same comment as for aluminium sulfate, powder)
  production volume
    (same comment as for waste cement, hydrated)
  properties: carbon content, non-fossil 0.454955, dry mass 0.888 kg, heating value, net 14.12 MJ, water content 0.126126, wet mass 1 kg
  note on heating value, net: Value taken from the general comment of the treatment dataset.
- waste plastic, mixture: -3.88e-5 kg; name ByP_03; lognormal variance with pedigree 0.2106, pedigree (5,5,5,5,5)
  (same comment as for aluminium sulfate, powder)
  production volume
    (same comment as for waste cement, hydrated)
  properties: carbon content, fossil 0.747344, dry mass 0.847 kg, heating value, net 30.79 MJ, water content 0.180638, wet mass 1 kg
  note on carbon content, fossil: C content in 1 kg DM was calculated using data in Tab A.2, ecoinvent v2.2 report 13_I
- wastewater treatment facility, capacity 5E9l/year: 1.42e-11 unit; lognormal variance with pedigree 0.2106, pedigree (5,5,5,5,5)
  (same comment as for aluminium sulfate, powder)

## Emissions to nature
- Aluminium III [air, non-urban air or from high stacks]: 4.64e-14 kg; lognormal variance with pedigree 3.56, pedigree (1,1,5,1,1)
  burden from direct release or incineration of landfill biogas. Uncertainty calculated from unertainty of the waste composition of this waste, uncertainty in waste decomposition and short-term leaching in sanitary landfill
- Aluminium III [air, urban air close to ground]: 3.1e-13 kg; lognormal variance with pedigree 2.3, pedigree (1,1,5,1,1)
  Emissions from short-term leachate treatment and incineration of resulting sludge. Uncertainty calculated depending on waste input and uncertainty of transfer coefficents in landfill, wastewater treatment and incineration model.
- Ammonia [air, urban air close to ground]: 5.91e-9 kg; lognormal variance with pedigree 0.81, pedigree (1,1,5,1,1)
  (same comment as for Aluminium III)
- Arsenic ion [air, non-urban air or from high stacks]: 9.34e-13 kg; lognormal variance with pedigree 3.1, pedigree (1,1,5,1,1)
  (same comment as for Aluminium III)
- Arsenic ion [air, urban air close to ground]: 1.88e-14 kg; lognormal variance with pedigree 2.58, pedigree (1,1,5,1,1)
  (same comment as for Aluminium III)
- Calcium [air, non-urban air or from high stacks]: 1.04e-13 kg; lognormal variance with pedigree 3.46, pedigree (1,1,5,1,1)
  (same comment as for Aluminium III)
- Calcium [air, urban air close to ground]: 6.77e-14 kg; lognormal variance with pedigree 2.41, pedigree (1,1,5,1,1)
  (same comment as for Aluminium III)
- Carbon dioxide, fossil [air, non-urban air or from high stacks]: 0.0011 kg; lognormal variance with pedigree 0.61, pedigree (1,1,5,1,1)
  (same comment as for Aluminium III)
- Carbon dioxide, fossil [air, urban air close to ground]: 3.68e-5 kg; lognormal variance with pedigree 1.06, pedigree (1,1,5,1,1)
  (same comment as for Aluminium III)
- Carbon monoxide, fossil [air, non-urban air or from high stacks]: 6.25e-8 kg; lognormal variance with pedigree 1.26, pedigree (1,1,5,1,1)
  (same comment as for Aluminium III)
- Carbon monoxide, fossil [air, urban air close to ground]: 2.36e-8 kg; lognormal variance with pedigree 1.12, pedigree (1,1,5,1,1)
  (same comment as for Aluminium III)
- Chromium III [air, non-urban air or from high stacks]: 5.29e-16 kg; lognormal variance with pedigree 3.97, pedigree (1,1,5,1,1)
  (same comment as for Aluminium III)
- Chromium III [air, urban air close to ground]: 7.7e-20 kg; lognormal variance with pedigree 3.02, pedigree (1,1,5,1,1)
  (same comment as for Aluminium III)
- Cobalt II [air, non-urban air or from high stacks]: 1.83e-14 kg; lognormal variance with pedigree 3.55, pedigree (1,1,5,1,1)
  (same comment as for Aluminium III)
- Cobalt II [air, urban air close to ground]: 1.15e-18 kg; lognormal variance with pedigree 2.58, pedigree (1,1,5,1,1)
  (same comment as for Aluminium III)
- Copper ion [air, non-urban air or from high stacks]: 3.71e-15 kg; lognormal variance with pedigree 3.88, pedigree (1,1,5,1,1)
  (same comment as for Aluminium III)
- Copper ion [air, urban air close to ground]: 7.09e-17 kg; lognormal variance with pedigree 2.9, pedigree (1,1,5,1,1)
  (same comment as for Aluminium III)
- Cyanide [air, urban air close to ground]: 1.66e-10 kg; lognormal variance with pedigree 0.92, pedigree (1,1,5,1,1)
  (same comment as for Aluminium III)
- Dinitrogen monoxide [air, urban air close to ground]: 1.63e-8 kg; lognormal variance with pedigree 0.74, pedigree (1,1,5,1,1)
  (same comment as for Aluminium III)
- Iron ion [air, non-urban air or from high stacks]: 1.36e-13 kg; lognormal variance with pedigree 3.41, pedigree (1,1,5,1,1)
  (same comment as for Aluminium III)
- Iron ion [air, urban air close to ground]: 2.47e-14 kg; lognormal variance with pedigree 2.02, pedigree (1,1,5,1,1)
  (same comment as for Aluminium III)
- Lead II [air, non-urban air or from high stacks]: 1.04e-15 kg; lognormal variance with pedigree 4.02, pedigree (1,1,5,1,1)
  (same comment as for Aluminium III)
- Lead II [air, urban air close to ground]: 1.03e-16 kg; lognormal variance with pedigree 3.05, pedigree (1,1,5,1,1)
  (same comment as for Aluminium III)
- Mercury II [air, non-urban air or from high stacks]: 2.9e-13 kg; lognormal variance with pedigree 2.79, pedigree (1,1,5,1,1)
  (same comment as for Aluminium III)
- Mercury II [air, urban air close to ground]: 1.23e-18 kg; lognormal variance with pedigree 2.72, pedigree (1,1,5,1,1)
  (same comment as for Aluminium III)
- Methane, fossil [air, non-urban air or from high stacks]: 0.000169 kg; lognormal variance with pedigree 0.65, pedigree (1,1,5,1,1)
  (same comment as for Aluminium III)
- Methane, fossil [air, urban air close to ground]: 7.21e-8 kg; lognormal variance with pedigree 1.11, pedigree (1,1,5,1,1)
  (same comment as for Aluminium III)
- Molybdenum VI [air, non-urban air or from high stacks]: 7.82e-15 kg; lognormal variance with pedigree 3.69, pedigree (1,1,5,1,1)
  (same comment as for Aluminium III)
- Molybdenum VI [air, urban air close to ground]: 3.08e-14 kg; lognormal variance with pedigree 2.64, pedigree (1,1,5,1,1)
  (same comment as for Aluminium III)
- NMVOC, non-methane volatile organic compounds [air, non-urban air or from high stacks]: 1.18e-9 kg; lognormal variance with pedigree 0.65, pedigree (1,1,5,1,1)
  (same comment as for Aluminium III)
- NMVOC, non-methane volatile organic compounds [air, urban air close to ground]: 3.27e-10 kg; lognormal variance with pedigree 1.23, pedigree (1,1,5,1,1)
  (same comment as for Aluminium III)
- Nickel II [air, non-urban air or from high stacks]: 7.7e-13 kg; lognormal variance with pedigree 3.2, pedigree (1,1,5,1,1)
  (same comment as for Aluminium III)
- Nickel II [air, urban air close to ground]: 5.23e-17 kg; lognormal variance with pedigree 2.23, pedigree (1,1,5,1,1)
  (same comment as for Aluminium III)
- Nitrogen oxides [air, non-urban air or from high stacks]: 1.71e-9 kg; lognormal variance with pedigree 1.51, pedigree (1,1,5,1,1)
  (same comment as for Aluminium III)
- Nitrogen oxides [air, urban air close to ground]: 5.77e-8 kg; lognormal variance with pedigree 0.8, pedigree (1,1,5,1,1)
  (same comment as for Aluminium III)
- Particulate Matter, < 2.5 um [air, non-urban air or from high stacks]: 2.1e-8 kg; lognormal variance with pedigree 0.91, pedigree (1,1,5,1,1)
  (same comment as for Aluminium III)
- Phosphorus [air, urban air close to ground]: 7.52e-14 kg; lognormal variance with pedigree 2.57, pedigree (1,1,5,1,1)
  (same comment as for Aluminium III)
- Selenium IV [air, non-urban air or from high stacks]: 2.79e-15 kg; lognormal variance with pedigree 3.69, pedigree (1,1,5,1,1)
  (same comment as for Aluminium III)
- Selenium IV [air, urban air close to ground]: 2.77e-20 kg; lognormal variance with pedigree 2.75, pedigree (1,1,5,1,1)
  (same comment as for Aluminium III)
- Silicon [air, non-urban air or from high stacks]: 3.97e-14 kg; lognormal variance with pedigree 3.51, pedigree (1,1,5,1,1)
  (same comment as for Aluminium III)
- Silicon [air, urban air close to ground]: 3.48e-13 kg; lognormal variance with pedigree 2.63, pedigree (1,1,5,1,1)
  (same comment as for Aluminium III)
- Sodium [air, non-urban air or from high stacks]: 1.92e-11 kg; lognormal variance with pedigree 2.79, pedigree (1,1,5,1,1)
  (same comment as for Aluminium III)
- Sulfur dioxide [air, non-urban air or from high stacks]: 2.77e-6 kg; lognormal variance with pedigree 1.31, pedigree (1,1,5,1,1)
  (same comment as for Aluminium III)
- Tin ion [air, non-urban air or from high stacks]: 6.95e-14 kg; lognormal variance with pedigree 3.5, pedigree (1,1,5,1,1)
  (same comment as for Aluminium III)
- Tin ion [air, urban air close to ground]: 2.15e-13 kg; lognormal variance with pedigree 2.47, pedigree (1,1,5,1,1)
  (same comment as for Aluminium III)
- Vanadium V [air, non-urban air or from high stacks]: 3.49e-12 kg; lognormal variance with pedigree 3, pedigree (1,1,5,1,1)
  (same comment as for Aluminium III)
- Vanadium V [air, urban air close to ground]: 6.88e-13 kg; lognormal variance with pedigree 1.97, pedigree (1,1,5,1,1)
  (same comment as for Aluminium III)
- Aluminium III [water, ground-, long-term]: 3.71e-7 kg; lognormal variance with pedigree 1.73, pedigree (1,1,5,1,1)
  Emissions from long-term leachate (>100a) directly from MSW landfill and indirectly via incineration of treatement sludge from leachate treatement. Uncertainty calculated depending on waste input and uncertainty of long-term transfer coefficents in landfill.
- Aluminium III [water, surface water]: 1.11e-11 kg; lognormal variance with pedigree 2.48, pedigree (1,1,5,1,1)
  (same comment as for Aluminium III)
- Ammonium [water, ground-, long-term]: 0.000105 kg; lognormal variance with pedigree 0.87, pedigree (1,1,5,1,1)
  (same comment as for Aluminium III)
- Ammonium [water, surface water]: 3.2e-6 kg; lognormal variance with pedigree 0.85, pedigree (1,1,5,1,1)
  (same comment as for Aluminium III)
- Arsenic ion [water, ground-, long-term]: 3.7e-8 kg; lognormal variance with pedigree 1.96, pedigree (1,1,5,1,1)
  (same comment as for Aluminium III)
- Arsenic ion [water, surface water]: 5.87e-11 kg; lognormal variance with pedigree 2.54, pedigree (1,1,5,1,1)
  (same comment as for Aluminium III)
- BOD5, Biological Oxygen Demand [water, ground-, long-term]: 0.00289 kg; lognormal variance with pedigree 0.71, pedigree (1,1,5,1,1)
  (same comment as for Aluminium III)
- BOD5, Biological Oxygen Demand [water, surface water]: 2.55e-6 kg; lognormal variance with pedigree 1.06, pedigree (1,1,5,1,1)
  (same comment as for Aluminium III)
- COD, Chemical Oxygen Demand [water, ground-, long-term]: 0.0122 kg; lognormal variance with pedigree 0.71, pedigree (1,1,5,1,1)
  (same comment as for Aluminium III)
- COD, Chemical Oxygen Demand [water, surface water]: 8.09e-6 kg; lognormal variance with pedigree 1.06, pedigree (1,1,5,1,1)
  (same comment as for Aluminium III)
- Calcium II [water, ground-, long-term]: 3.18e-7 kg; lognormal variance with pedigree 1.75, pedigree (1,1,5,1,1)
  (same comment as for Aluminium III)
- Calcium II [water, surface water]: 3.74e-10 kg; lognormal variance with pedigree 2.38, pedigree (1,1,5,1,1)
  (same comment as for Aluminium III)
- Chloride [water, surface water]: 5.04e-10 kg; lognormal variance with pedigree 2.55, pedigree (1,1,5,1,1)
  Emissions from short-term leachate treatment. Uncertainty calculated depending on waste input and uncertainty of transfer coefficents in landfill and wastewater treatment.
- Chromium III [water, surface water]: 3.32e-15 kg; lognormal variance with pedigree 2.93, pedigree (1,1,5,1,1)
  (same comment as for Aluminium III)
- Chromium VI [water, ground-, long-term]: 8.41e-11 kg; lognormal variance with pedigree 9.25, pedigree (1,1,5,1,1)
  (same comment as for Aluminium III)
- Chromium VI [water, surface water]: 1.11e-12 kg; lognormal variance with pedigree 2.9, pedigree (1,1,5,1,1)
  (same comment as for Aluminium III)
- Cobalt II [water, ground-, long-term]: 2.27e-8 kg; lognormal variance with pedigree 1.96, pedigree (1,1,5,1,1)
  (same comment as for Aluminium III)
- Cobalt II [water, surface water]: 3.72e-11 kg; lognormal variance with pedigree 2.46, pedigree (1,1,5,1,1)
  (same comment as for Aluminium III)
- Copper ion [water, ground-, long-term]: 2.65e-7 kg; lognormal variance with pedigree 1.78, pedigree (1,1,5,1,1)
  (same comment as for Aluminium III)
- Copper ion [water, surface water]: 3.37e-12 kg; lognormal variance with pedigree 2.83, pedigree (1,1,5,1,1)
  (same comment as for Aluminium III)
- DOC, Dissolved Organic Carbon [water, ground-, long-term]: 0.0112 kg; lognormal variance with pedigree 0.71, pedigree (1,1,5,1,1)
  (same comment as for Aluminium III)
- DOC, Dissolved Organic Carbon [water, surface water]: 1.96e-6 kg; lognormal variance with pedigree 1.06, pedigree (1,1,5,1,1)
  (same comment as for Aluminium III)
- Hydrogen sulfide [water, ground-, long-term]: 0.000154 kg; lognormal variance with pedigree 0.6, pedigree (1,1,5,1,1)
  (same comment as for Aluminium III)
- Iron ion [water, ground-, long-term]: 2.79e-7 kg; lognormal variance with pedigree 3.2, pedigree (1,1,5,1,1)
  (same comment as for Aluminium III)
- Iron ion [water, surface water]: 2.77e-10 kg; lognormal variance with pedigree 2.34, pedigree (1,1,5,1,1)
  (same comment as for Aluminium III)
- Lead II [water, ground-, long-term]: 5.3e-8 kg; lognormal variance with pedigree 1.96, pedigree (1,1,5,1,1)
  (same comment as for Aluminium III)
- Lead II [water, surface water]: 3.43e-13 kg; lognormal variance with pedigree 2.99, pedigree (1,1,5,1,1)
  (same comment as for Aluminium III)
- Mercury II [water, ground-, long-term]: 1.06e-9 kg; lognormal variance with pedigree 1.96, pedigree (1,1,5,1,1)
  (same comment as for Aluminium III)
- Mercury II [water, surface water]: 2.3e-13 kg; lognormal variance with pedigree 2.66, pedigree (1,1,5,1,1)
  (same comment as for Aluminium III)
- Molybdenum VI [water, ground-, long-term]: 1.17e-8 kg; lognormal variance with pedigree 2.18, pedigree (1,1,5,1,1)
  (same comment as for Aluminium III)
- Molybdenum VI [water, surface water]: 1.85e-11 kg; lognormal variance with pedigree 2.61, pedigree (1,1,5,1,1)
  (same comment as for Aluminium III)
- Nickel II [water, ground-, long-term]: 5.3e-6 kg; lognormal variance with pedigree 1.39, pedigree (1,1,5,1,1)
  (same comment as for Aluminium III)
- Nickel II [water, surface water]: 1.87e-9 kg; lognormal variance with pedigree 2.11, pedigree (1,1,5,1,1)
  (same comment as for Aluminium III)
- Nitrate [water, ground-, long-term]: 1.11e-5 kg; lognormal variance with pedigree 0.87, pedigree (1,1,5,1,1)
  (same comment as for Aluminium III)
- Nitrate [water, surface water]: 1.17e-5 kg; lognormal variance with pedigree 0.77, pedigree (1,1,5,1,1)
  (same comment as for Aluminium III)
- Nitrite [water, ground-, long-term]: 5.73e-6 kg; lognormal variance with pedigree 0.87, pedigree (1,1,5,1,1)
  (same comment as for Aluminium III)
- Nitrite [water, surface water]: 6.73e-8 kg; lognormal variance with pedigree 1.14, pedigree (1,1,5,1,1)
  (same comment as for Aluminium III)
- Nitrogen [water, surface water]: 8.69e-8 kg; lognormal variance with pedigree 0.78, pedigree (1,1,5,1,1)
  (same comment as for Aluminium III)
- Nitrogen, organic bound [water, ground-, long-term]: 0.000172 kg; lognormal variance with pedigree 0.87, pedigree (1,1,5,1,1)
  (same comment as for Aluminium III)
- Phosphate [water, ground-, long-term]: 4.4e-9 kg; lognormal variance with pedigree 8.05, pedigree (1,1,5,1,1)
  (same comment as for Aluminium III)
- Phosphate [water, surface water]: 1.28e-10 kg; lognormal variance with pedigree 2.54, pedigree (1,1,5,1,1)
  (same comment as for Aluminium III)
- Selenium IV [water, ground-, long-term]: 2.99e-9 kg; lognormal variance with pedigree 2.36, pedigree (1,1,5,1,1)
  (same comment as for Aluminium III)
- Selenium IV [water, surface water]: 7.47e-12 kg; lognormal variance with pedigree 2.61, pedigree (1,1,5,1,1)
  (same comment as for Aluminium III)
- Silicon [water, ground-, long-term]: 0.00846 kg; lognormal variance with pedigree 3.97, pedigree (1,1,5,1,1)
  (same comment as for Aluminium III)
- Silicon [water, surface water]: 9.57e-12 kg; lognormal variance with pedigree 2.62, pedigree (1,1,5,1,1)
  (same comment as for Aluminium III)
- Sodium I [water, ground-, long-term]: 1.78e-6 kg; lognormal variance with pedigree 1.53, pedigree (1,1,5,1,1)
  (same comment as for Aluminium III)
- Sodium I [water, surface water]: 7.68e-8 kg; lognormal variance with pedigree 1.73, pedigree (1,1,5,1,1)
  (same comment as for Chloride)
- Sulfate [water, ground-, long-term]: 0.0059 kg; lognormal variance with pedigree 0.6, pedigree (1,1,5,1,1)
  (same comment as for Aluminium III)
- Sulfate [water, surface water]: 2.41e-5 kg; lognormal variance with pedigree 1.09, pedigree (1,1,5,1,1)
  (same comment as for Chloride)
- TOC, Total Organic Carbon [water, ground-, long-term]: 0.0112 kg; lognormal variance with pedigree 0.71, pedigree (1,1,5,1,1)
  (same comment as for Aluminium III)
- TOC, Total Organic Carbon [water, surface water]: 2.05e-6 kg; lognormal variance with pedigree 1.06, pedigree (1,1,5,1,1)
  (same comment as for Aluminium III)
- Tin ion [water, ground-, long-term]: 4.72e-6 kg; lognormal variance with pedigree 1.41, pedigree (1,1,5,1,1)
  (same comment as for Aluminium III)
- Tin ion [water, surface water]: 1.16e-10 kg; lognormal variance with pedigree 2.44, pedigree (1,1,5,1,1)
  (same comment as for Aluminium III)
- Vanadium V [water, ground-, long-term]: 3.86e-6 kg; lognormal variance with pedigree 1.65, pedigree (1,1,5,1,1)
  (same comment as for Aluminium III)
- Vanadium V [water, surface water]: 7.1e-9 kg; lognormal variance with pedigree 1.92, pedigree (1,1,5,1,1)
  (same comment as for Aluminium III)

## Sampling procedure
Landfill model based on observed leachate concentrations in literature. Extrapolated to 60'000 years heeding chemical characteristics. Initial waste composition from various literature sources.

## Review by Niels Jungbluth 2003-07-21
Passed. Calculation for standard deviation 95 of, i.e., infrastructure,
land occupation, transport services or other services can differ from
standard Pedigree approach used in this project and figures obtained by
this procedure.
