# treatment of sewage sludge, 75% water, WWT, WW from medium density board production, sanitary landfill

Dataset: EcoSpold 2, unit process
Geography: RoW
Time period: 1994-01-01 to 2022-12-31
Technology level: current
Classification: ISIC rev.4 ecoinvent: 3821:Treatment and disposal of non-hazardous waste
Scenario: Business-as-Usual
System model: Allocation at the point of substitution
Generated by: Nikolia Stoikou
Database: ecoinvent
isCopyrightProtected: true

## General comment
The process represents the treatment of a waste (sewage sludge) that is exclusively generated from another waste treatment. Sewage sludge is generated in the wastewater treatment of 'wastewater from medium density board production'. Recommended use of this dataset: to be used within the specific chain of treatments for 'wastewater from medium density board production'. Share of biogenic carbon in the sludge: 98.76%. Landfill gas capture and utilisation generates 0.03321 kWh of electricity and 0.0599 MJ of useful heat. 0.002598 kg waste mass remains in the landfill even after the long term period.

## Included activities start
The activity starts with the waste being available at the gate of the treatment facility. Collection and transportation of the waste to the treatment plant is not included.

## Included activities end
The activity ends with the waste being treated and waste-specific emissions from the landfill are released to the environment (air due to landfil gas and water due to landfil leachate).

## Geography
Landfill site with mean annual temperature (MAT) of 16.743579766537 degC, mean annual precipitation (MAP) of 1250.84108527132 mm/year, and net infiltration of 790.252035689178 mm/year.The leachate percolating through the landfill has an average residence time of 6.33 years.
References: UN data, 2020. Precipitation, Environment Statistics Database, United Nations Statistics Division Available at: http://data.un.org/Data.aspx?q=precipitation&d=ENV&f=variableID%3a6;
World Bank, 2022. Surface area (sq.km), World Bank Group Available at: https://data.worldbank.org/indicator/AG.SRF.TOTL.K2;
Doka G.,2021. A model for composition-specific life cycle inventories of regionalised wastewater fates, Zurich, Switzerland. http://www.doka.ch/publications.htm

## Technology
Sanitary (controlled) landfill for municipal solid waste. Ultimate average landfill height is 20 meters. Operation phase duration is 30 years. The total raw landfill gas mass produced in the landfill from this waste is 0.143 kg. The total CH4 mass in the raw landfill gas is 0.07636 kg. Percentage of landfill gas directly emitted is 47w%. Percentage of landfill gas captured and flared is 18.02w%. Percentage of landfill gas captured and utilised is 34.98%. Conversion efficiencies are 27.8e% for electricity and 13.5e% for useful heat. Leachate generated during the first 100 years is collected and treated region-specifically before emission. Based on average waste composition and climate data the end of carbonate phase is estimated to be reached 2'863 years after waste deposition.

## Reference product
- heat, district or industrial, other than natural gas: 1 MJ; By-product classification allocatable product; CPC 17300: Steam and hot water; lognormal variance with pedigree 0.5224, pedigree (5,5,5,5,5)
  Net production of heat from landfill gas utilisation.
  Uncertainty: Uncertainty calculated depending on waste input and uncertainty of transfer coefficients in landfill to landfill gas, uncertainty in gas capture and utilisation.
  production volume 147206 MJ
    Calculated from the production volume of the reference product in proportion to the respective output amounts.
  property corresponding fuel use, propane, furnace >100kW 0 MJ; name fuel_use
    Lower heating value of the fuel input related to the heat/electricity output, taken directly from ecoinvent v3.0 dataset "heat production, natural gas, at industrial furnace >100kW, GLO 2000".
  property price 0.0106 EUR2005
    Average European district heat price from Ecoheatcool and Euroheat 2005-2006, Ecoheat Work package 1: The European heat market. Final report. 10.6 EUR/GJ i s the price of district heat. http://www.solarthermalworld.org/files/Ecoheatcool%20WP1%20Web.pdf?download
  properties: carbon allocation 0 kg, carbon content 0, carbon content, fossil 0, carbon content, non-fossil 0, dry mass 1 kg, heating value, net 1 MJ, water content 0, water in wet mass 0 kg, wet mass 1 kg

## Inputs from technosphere
- aluminium sulfate, powder: 9.53954e-7 kg
- biowaste: -3.77816e-5 kg
- chemical, organic: 3.74469e-5 kg
- diesel, burned in building machine: 0.00148951 MJ
- dust collector, electrostatic precipitator, for industrial use: 2.33125e-10 unit
- electricity, medium voltage: 0.00210714, 0.000657495, 1.95802e-5, 9.99061e-5, 0.00603257, 0.000329973 kWh (6 suppliers, which the file names only by identifier); sum of these 0.00924666 kWh
- furnace, wood chips, softwood storage area, 1000kW: 1.16495e-9 unit
- furnace, wood chips, with silo, 5000kW: 4.92351e-9 unit
- hazardous waste, for incineration: -3.32288e-5 kg
- heat, district or industrial, natural gas: 0.0449084 MJ
- heat, district or industrial, other than natural gas: 0.00105995, 0.000645533 MJ (2 suppliers, which the file names only by identifier); sum of these 0.00170548 MJ
- lubricating oil: 5.48523e-6 kg
- melamine formaldehyde resin: 0.00175728 kg
- paraffin: 0.000197485 kg
- pulpwood, hardwood, measured as solid wood under bark: 3.11606e-7 m3
- pulpwood, softwood, measured as solid wood under bark: 2.61224e-5 m3
- sawdust, wet, measured as dry mass: 2.51073e-5, 0.00123093 kg (2 suppliers, which the file names only by identifier); sum of these 0.00125604 kg
- slab and siding, softwood, wet, measured as dry mass: 8.74957e-5, 0.000339273 kg (2 suppliers, which the file names only by identifier); sum of these 0.000426769 kg
- tap water: 2.25e-5, 0.000937655, 3.71849e-5, 6.93851e-5, 0.0107301, 2.43929e-5, 0.000186918 kg (7 suppliers, which the file names only by identifier); sum of these 0.0120081 kg
- urea: 1.48377e-5, 1.87656e-6, 1.26704e-5 kg (3 suppliers, which the file names only by identifier); sum of these 2.93846e-5 kg
- urea formaldehyde resin: 0.00194975 kg
- wastewater from medium density board production: -1.70289e-5 m3
- wood ash mixture, pure: -8.38909e-5 kg
- wood chips, dry, measured as dry mass: 0.0153766 kg
- wood chips, from post-consumer wood, measured as dry mass: 0.00464425 kg
- wood chips, wet, measured as dry mass: 5.47651e-8, 2.41706e-5 kg (2 suppliers, which the file names only by identifier); sum of these 2.42254e-5 kg
- wooden board factory, organic bonded boards: 1.59391e-12 unit

## Inputs from nature
- Water, cooling, unspecified natural origin [natural resource, in water]: 1.20081e-5 m3
- Water, river [natural resource, in water]: 1.35143e-5 m3
- Water, well, in ground [natural resource, in water]: 1.17571e-8 m3

## Emissions to nature
- Acetaldehyde [air, urban air close to ground]: 2.51437e-8 kg
- Ammonia [air, urban air close to ground]: 3.04897e-7 kg
- Arsenic ion [air, urban air close to ground]: 1.76241e-10 kg
- Benzene [air, urban air close to ground]: 1.6038e-7 kg
- Benzene, ethyl- [air, urban air close to ground]: 5.28724e-9 kg
- Benzene, hexachloro- [air, urban air close to ground]: 1.26894e-15 kg
- Benzo(a)pyrene [air, urban air close to ground]: 8.81206e-11 kg
- Bromine [air, urban air close to ground]: 1.05745e-8 kg
- Cadmium II [air, urban air close to ground]: 1.23369e-10 kg
- Calcium [air, urban air close to ground]: 1.03101e-6 kg
- Carbon dioxide, non-fossil [air, urban air close to ground]: 0.0179766 kg
- Carbon monoxide, non-fossil [air, urban air close to ground]: 3.52483e-5 kg
- Chlorine [air, urban air close to ground]: 3.17234e-8 kg
- Chromium III [air, urban air close to ground]: 6.97916e-10 kg
- Chromium VI [air, urban air close to ground]: 7.04965e-12 kg
- Copper ion [air, urban air close to ground]: 3.87731e-9 kg
- Dinitrogen monoxide [air, urban air close to ground]: 4.05355e-7 kg
- Dioxins, measured as 2,3,7,8-tetrachlorodibenzo-p-dioxin [air, urban air close to ground]: 5.28724e-15 kg
- Fluorine [air, urban air close to ground]: 8.81206e-9 kg
- Formaldehyde [air, urban air close to ground]: 5.79684e-6 kg
- Hydrocarbons, aliphatic, alkanes, unspecified [air, urban air close to ground]: 1.6038e-7 kg
- Hydrocarbons, aliphatic, unsaturated [air, urban air close to ground]: 5.46348e-7 kg
- Lead II [air, urban air close to ground]: 4.40603e-9 kg
- Magnesium [air, urban air close to ground]: 6.34469e-8 kg
- Manganese II [air, urban air close to ground]: 2.9961e-8 kg
- Mercury II [air, urban air close to ground]: 5.28724e-11 kg
- Methane, non-fossil [air, urban air close to ground]: 2.64362e-7 kg
- Methanol [air, non-urban air or from high stacks]: 7.53121e-7 kg
- NMVOC, non-methane volatile organic compounds [air, urban air close to ground]: 1.65435e-5 kg
- Nickel II [air, urban air close to ground]: 1.05745e-9 kg
- Nitrogen oxides [air, urban air close to ground]: 2.1149e-5 kg
- PAH, polycyclic aromatic hydrocarbons [air, urban air close to ground]: 1.95628e-9 kg
- Particulate Matter, < 2.5 um [air, urban air close to ground]: 4.40603e-7 kg
- Particulate Matter, > 10 um [air, unspecified]: 3.35557e-6 kg
- Phenol, pentachloro- [air, urban air close to ground]: 1.42755e-12 kg
- Phosphorus [air, urban air close to ground]: 5.28724e-8 kg
- Potassium I [air, urban air close to ground]: 4.12405e-6 kg
- Sodium [air, urban air close to ground]: 2.29114e-7 kg
- Sulfur dioxide [air, urban air close to ground]: 4.40603e-7 kg
- Toluene [air, urban air close to ground]: 5.28724e-8 kg
- Zinc II [air, urban air close to ground]: 5.28724e-8 kg
- m-Xylene [air, urban air close to ground]: 2.1149e-8 kg
