# cyclic N-compound production

Dataset: EcoSpold 2, unit process
Geography: RER
Time period: 2000-01-01 to 2022-12-31
Technology level: current
Classification: EcoSpold01Categories: agricultural means of production/pesticides
Classification: ISIC rev.4 ecoinvent: 2021:Manufacture of pesticides and other agrochemical products
Tags: ConvertedDataset
Scenario: Business-as-Usual
System model: Allocation at the point of substitution
Share of production covered: 100 %
Generated by: Jürgen Sutter
Published in: Sutter, J. 2007
Database: ecoinvent
isCopyrightProtected: true

## General comment
This dataset represents the production of cycli-N-compounds (1 kg of active ingredient). Raw materials are modelled with a stoichiometric calculation. Energy consumption is modelled with data from a similar process. The emissions are estimated. Infrastructure is included with a default value.
[This dataset was already contained in the ecoinvent database version 2. It was not individually updated during the transfer to ecoinvent version 3. Life Cycle Impact Assessment results may still have changed, as they are affected by changes in the supply chain, i.e. in other datasets. This dataset was generated following the ecoinvent quality guidelines for version 2. It may have been subject to central changes described in the ecoinvent version 3 change report (http://www.ecoinvent.org/database/ecoinvent-version-3/reports-of-changes/), and the results of the central updates were reviewed extensively. The changes added e.g. consistent water flows and other information throughout the database. The documentation of this dataset can be found in the ecoinvent reports of version 2, which are still available via the ecoinvent website. The change report linked above covers all central changes that were made during the conversion process.]

## Included activities start
From reception of precursors (acetic anhydride, acetone, adipic acid, ammonia, benzene, bromine, butene, carbon monoxide, chlorine, dichloromethane, formic acid, hydrochloric acid, hydrogen, hydrogen fluoride, hydrogen peroxide, hydrogen sulfide, iodine, liquefied petroleum gas, lithium, methanol, methane, o-dichlorobenzene, oxygen, 1-pentanol, phenol, phosphorus, propanal, propylene glycol, propylene oxide, silicon, sodium cyanide, sodium hydroxide, sodium hypochlorite, sodium methoxide, sodium tetrahydroborate, sulfur dioxide, toluene, water decarbonised, and "water, salt, sole") at the factory gate.

## Included activities end
This activity ends with cycli-N-compounds at the factory gate. The dataset includes the input materials, energy uses, infrastructure and emissions. The dataset doesn't include emulsives, additives etc.

## Geography
The inventory is modelled for Europe.

## Technology
Triazoles are produced by reacting 1,2,4-triazole and a halo-compound.
Morpholines are synthesized by a dehydration of a amine diol.
The dataset cyclic-N-compounds was calculated from the arithmetic mean of all inputs and outputs of the production of difenoconazol, fenpropimorph, flusilazol, metconazole, penconazol, propiconazole, and tebuconazole.

Difenoconazole is produced in five steps from m-dichlorobenzene:
C6H4Cl2 + C2H3ClO → C8H6Cl2O + HCl
C8H6Cl2O + C6H5ClO → C14H10Cl2O2 + HCl
C14H10Cl2O2 + Br2 → C14H9Cl2BrO2 + HBr
C14H9Cl2BrO2 + C3H8O2 → C17H15Cl2BrO3 + H2O
C17H15Cl2BrO3 + C2H3N3 → C19H17Cl2N3O3 + HBr
Precursors that are used for the difenconazole production are acetyl chloride (C2H3ClO), p-chlorophenol (C6H5ClO), hydrazine (C2H3N3), and 1,2,4-triazole (C3H8O2).

Fenpropimorph is produced in four steps from propylene oxide:
C3H6O + NH3 → C6H15NO2
C6H15NO2 → C6H14NO + H2O
C6H14NO + CH2O2 → C7H14NO2 + H2O
C7H14NO2 + C14H20O → C20H33NO + CO2
A precursor that is used for the fenpropimorph production is 3(p-tert-butylphenyl)-2-methyl-propanal (C14H20O).

Flusilazole is produced in three steps from silicon:
Si + 3 CH2Cl2 → C2H5Cl3Si + CHCl3
C2H5Cl3Si + 2 C6H4FLi → C14H14ClF2Si + 2 LiCl
C14H14ClF2Si + C2H2N3Na → C16H15F2N3Si + NaCl
Precursors that are used for the flusilazole production are p-fluoro-lithio benzene (C6H4FLi), hydrazine (N2H4), and 1,2,4-triazole sodium (C2H2N3Na).

Metconazole is produced in nine steps from adipic acid:
C6H7O4 → C5H6O + H2O + CHO2
C5H6O + NaCN + HCl → C6H7N + NaCl
C6H7N + 2 H2O → C6H8O3 + NH3
C6H8O3 + CH4O → C7H10O3 + H2O
C7H10O3 + 2 CH3Cl → C9H14O3 + 2 HCl
C9H14O3 + C7H6Cl2 → C16H19ClO3 + HCl
C16H19ClO3 + H2O → C14H17ClO + CH4O + CO2
C14H17ClO + C3H9OSI → C15H19ClO + C2H6OS + HI
C15H19ClO + C2H3N3 → C17H22ClN3O
Precursors that are used for the metconazole production are 4-chloro benzyl chloride (C7H6Cl2), hydrazine (N2H4), 1,2,4-triazole (C2H3N3), and trimethyl sulfoxonium iodide (C3H9OSI).

Penconazole is produced in eight steps from toluene:
C7H8 + 2 Cl2 → C7H6Cl2 + 2 HCl
C7H6Cl2 + Br2 → C7H5Cl2Br + HBr
C7H5Cl2Br + NaCN → C8H5Cl2N + NaBr
C8H5Cl2N + 2 H2O → C8H6Cl2O2 + NH3
C8H6Cl2O2 + C3H7Br → C11H12Cl2O2 + HBr
2 C11H12Cl2O2 + NaBH4 + HCl + H2O → 2 C11H14Cl2O + H3BO3 + NaCl
C11H14Cl2O + CH3ClO2S → C12H16Cl2O3S + HCl
C14H16Cl2O3S + C2H3N3 → C13H15Cl2N3 + CH4SO3
Precursors that are used for the penconazole production are bromo propane (C3H7Br), mesyl chloride (CH3ClO2S), 1,2,4-triazole (C2H3N3), and hydrazine (N2H4).

Propiconazole is produced in five steps from acetic anhydride:
C4H6O3 + HCl → C2H3ClO + C2H4O2
C2H3ClO + C6H4Cl2 → C8H6Cl2O + HCl
C8H6Cl2O + Br2 → C8H5Cl2BrO + HBr
C8H5Cl2BrO + C5H12O2 → C13H15Cl2BrO2 + H2O
C13H15Cl2BrO2 + C2H3N3 → C15H17Cl2N3O2 + HBr
Precursors that are used for the propiconazole production are hydrazine (N2H4), 1,2-pentanediol (C5H12O2), and 1,2,4-triazole (C2H3N3).

Tebuconazole is produced in six steps from acetone:
C6H6O + H2 → C6H14O2
C6H14O2 → C6H12O + H2O
C6H12O + Cl2 → C6H11ClO + HCl
C6H11ClO + C7H7Cl → C13H17ClO + HCl
C13H17ClO + CH3ONa + C2H6S + HCl → C14H19ClO + NaCl + CH4S + CH4O
C14H19ClO + C2H3N3 → C16H22ClN3O
Precursors that are used for the tebuconazole production are p-chloro-toluene (C7H7Cl), dimethyl sulfide (C2H6S), hydrazine (N2H4), and 1,2,4-triazole (C2H3N3).

Precursors:

Acetyl chloride (C2H3ClO) is produced from acetic anhydride and hydrogen chloride:
C4H6O3 + HCl → C2H3ClO + C2H4O2

Bromo propane (C3H7Br) is produced from propane and bromine (Unger 1996: 1052-1062):
C3H8 + Br2 → C3H7Br + HBr

3(p-tert-Butylphenyl)-2-methyl-propanal (C14H20O) is produced in five steps from toluene:
C7H8 + C4H8 → C11H16
2 C11H16 + 3 O2 → 3 C11H14O2 + 2 H2O
C11H14O2 + H2 → C11H14O + H2O
C11H14O + C3H6O → C14H18O + H2O
C14H18O + H2 → C14H20O

4-Chloro benzyl chloride (C7H6Cl2) is produced from toluene and chlorine:
C7H8 + Cl2 → C7H6Cl2 + HCl

p-Chlorophenol (C6H5ClO) is produced by chlorination of phenol:
C6H6O + Cl2 → C6H5ClO + HCl

p-Chloro-toluene (C7H7Cl) is produced by chlorination of toluene:
C7H8 + Cl2 → C7H7Cl + HCl

Dimethyl sulfide (C2H6S) is produced from methanol and hydrogen sulfide:
2 CH4O + H2S → C2H6S + 2 H2O

p-Fluoro-lithio benzene (C6H4FLi) is produced in three steps from benzene:
C6H6 + 2 Br2 → C6H4Br + 2 HBr
C6H4Br + HF → C6H4BrF + HBr
C6H4BrF + Li → C6H4FLi + HBr

Hydrazine (C2H3N3) is produced in two steps from sodium hypochlorite:
NaOCl + NH3 → NH2Cl + NaOH
NH2Cl + NaOH + NH3 → N2H4 + NaCl + H2O

Mesyl chloride (CH3ClO2S) is produced from methane:
CH4+ SO2 + Cl2 → CH3ClO2S + HCl

1,2-Pentanediol (C5H12O2) is produced in two steps from pentanol:
C5H123O → C5H10 + H2O
C5H10 + H2O2 → C5H12O2

1,2,4-Triazole (C2H3N3) is produced in two steps from ammonia:
NH3 + CO → CH3NO
2 CH3NO + N2H4 → C2H3N3 + NH3 + 2 H2O

1,2,4-Triazole sodium salt (C2H2N3Na) is produced in three steps from ammonia:
NH3 + CO → CH3NO
2 CH3NO + N2H4 → C2H3N3 + NH3 + 2 H2O
C2H3N3 + NaOH → C2H2N3Na + H2O

## Time period
Time of publications

## Parameters
- fraction, cooling water, cooling pond system, to air: 0.032 dimensionless; name fraction_CW_CP_to_air; lognormal variance with pedigree 0.0413, pedigree (2,3,1,3,1)
  Calculated based on literature value (Scown, C.D., 2011, Water Footprint of U.S. Transportation Fuels and supplying information of the article) (Vionnet, S., Quantis Water Database - Technical Report, 2012).
- fraction, cooling water, once-through system, to air: 0.004 dimensionless; name fraction_CW_OT_to_air; lognormal variance with pedigree 0.0413, pedigree (2,3,1,3,1)
  (same comment as for fraction, cooling water, cooling pond system, to air)
- fraction, cooling water, recirculating system, to air: 0.771 dimensionless; name fraction_CW_R_to_air; lognormal variance with pedigree 0.0413, pedigree (2,3,1,3,1)
  (same comment as for fraction, cooling water, cooling pond system, to air)
- fraction, cooling water, to air: 0.3875 dimensionless; name fraction_CW_to_air; = (0.5*fraction_CW_OT_to_air)+(0.5*fraction_CW_R_to_air); lognormal variance with pedigree 0.092025, pedigree (4,4,3,2,4)
  Calculated value based on literature value (see comments of the other parametres present in this dataset) and expert opinion. In the case when no industry/literature data are available about the type of cooling or directly fraction, cooling water, to air specific for the process a default assumption is applied. It is assumed that the once-through cooling system is used in 50% of all cases and recirculating system is used in another 50% of all cases.
- fraction, process water, to air: 0.205 dimensionless; name fraction_PW_to_air; lognormal variance with pedigree 0.092025, pedigree (4,4,3,2,4)
  Literature value (Statistics Canada, 2007 & Shaffer, K.H., 2008, Consumptive water use in the Great Lakes Basin, USGS) (Vionnet, S., Quantis Water Database - Technical Report, 2012).
- fraction, water, decarbonised, to air: 0.3875 dimensionless; name fraction_WDC_to_air; = fraction_CW_to_air; lognormal variance with pedigree 0.092025, pedigree (4,4,3,2,4)
  Calculated value. See comments in the other parametres present in this dataset. Decarbonised water is considered to be always used as cooling water, thus cooling water fractions to air are applied to all carbonised water input flows to calculate the amount of water consumed in the processes.

## Reference product
- cyclic N-compound: 1 kg; By-product classification allocatable product; CPC 3466: Insecticides, fungicides, herbicides and disinfectants
  Cyclic N-compounds can have different modes of action as fungicides. Fenpropidin and fenpropimorph act in Δ14-reductase and Δ8→Δ7-isomerase in sterol biosynthesis (erg24, erg2); difenoconazol, flusilazol, metconazolel, penconazol, propiconazole, and tebuconazole act in C14-demethylase in sterol biosynthesis (erg11/cyp51).
  EcoSpold01Location=RER
  production volume 1.40009e6 kg
    Unknown
    The addition of the consumption volumes in the US in 2002 (from USGS, 2002 Pesticide use Maps) of the cyclic N-compounds carfentrazone, clofentezine, dimethomorph, etridiazole, fenbuconazole, fludioxonil, imidacloprid, myclobutanil, propiconazole, tebuconazole, tetraconazole, thiamethoxam, triadimefon has been used to estimate the production volumes of this type of pesticide in the Europe. For that, it has been extrapolated to a Global production mix using the ha of Arable land and Permanent crops of US versus the ha of Arable land and Permanent crops in the Europe in 2002 (299/179 million ha; FAOSTAT).
  property carbon content, fossil 0.641962
    Calculated as an unweigthed average of the C content of the cyclic N-compounds where information was avaliable in Sutter, 2010, following the classification in Tab 2.25 in Sutter 2010: Difenoconazole (C19H17Cl2N3O3), Fenpropidin (C19H31N), Fenpropimorph (C20H33NO), Flusilazole (C16H15F2N3Si), Metconazole (C17H22ClN3O), Penconazole (C13H15Cl2N3), Propiconazole (C15H17Cl2N3O2), Tebuconazole (C16H22ClN3O)
  property price 4.62392 EUR2005
    Calculated based on inputs: The price of the product has been calculated as a sum of the values of the material and energy inputs for this product. This value is therefore a rough estimation. It may underestimate the real price since there are additional expenses when producing any product. These expences can include for example labour costs, treatment of waste materials and profit for the producer. Please consider carefully whether this level of data quality is acceptable for your application.
  properties: carbon allocation 0.641962 kg, carbon content 0.641962, carbon content, non-fossil 0, dry mass 1 kg, water content 0, water in wet mass 0 kg, wet mass 1 kg

## Inputs from technosphere
- 1-pentanol: 0.045262 kg; source Unger T A 1996; lognormal variance with pedigree 0.044, pedigree (4,5,4,1,1)
  Stoichiometric calculation, assuming an efficiency of 95% per reaction step.
  EcoSpold01Location=RER
  Uncertainty: Stoechiometric calculation
  properties: carbon content, fossil 0.681818, dry mass 1 kg, heating value, net 37.14 MJ, wet mass 1 kg
- acetic anhydride: 0.10417 kg; source Unger T A 1996; lognormal variance with pedigree 0.044, pedigree (4,5,4,1,1)
  Stoichiometric calculation, assuming an efficiency of 95% per reaction step.
  Further references:
  Cheung et al. 2000. Hosea Cheung, Robin S. Tanke, G. Paul Torrence: Acetic Acid. In: Ullmann's Encyclopedia of Industrial Chemistry, Seventh Edition, 2009 Electronic Release (ed. Fiedler E., Grossmann G., Kersebohm D., Weiss G. and Witte C.). 7 th Electronic Release Edition. Wiley InterScience, New York, Article Online Posting Date: June 15, 2000. Online-Version under: DOI: 10.1002/14356007.a01_045
  EcoSpold01Location=RER
  Uncertainty: Stoechiometric calculation
  properties: carbon content, fossil 0.470588, dry mass 1 kg, heating value, net 21.38 MJ, wet mass 1 kg
- acetone, liquid: 0.034875 kg; source Unger T A 1996; lognormal variance with pedigree 0.044, pedigree (4,5,4,1,1)
  EcoSpold01Location=RER
  Stoichiometric calculation, assuming an efficiency of 95% per reaction step.
  Uncertainty: Stoechiometric calculation
  properties: carbon content, fossil 0.62069, dry mass 1 kg, heating value, net 31.32 MJ, wet mass 1 kg
- adipic acid: 0.065606 kg; source Unger T A 1996; lognormal variance with pedigree 0.044, pedigree (4,5,4,1,1)
  (same comment as for acetone, liquid)
  properties: carbon content, fossil 0.493151, dry mass 1 kg, heating value, net 23.23 MJ, wet mass 1 kg
- ammonia, anhydrous, liquid: 0.22415 kg; source Unger T A 1996; lognormal variance with pedigree 0.044, pedigree (4,5,4,1,1)
  EcoSpold01Location=RER
  Stoichiometric calculation, assuming an efficiency of 95% per reaction step.
  Further references:
  Bipp et al. 2000. Hansjörg Bipp and Heinz Kieczka: Formamides. In: Ullmann's Encyclopedia of Industrial Chemistry, Seventh Edition, 2009 Electronic Release (ed. Fiedler E., Grossmann G., Kersebohm D., Weiss G. and Witte C.). 7 th Electronic Release Edition. Wiley InterScience, New York, Article Online Posting Date: June 15, 2000. Online-Version under: DOI: 10.1002/14356007.a12_001
  Frauenkron et al. 2001. Matthias Frauenkron, Johann-Peter Melder, Günther Ruider, Roland Rossbacher, Hartmut Höke: Ethanolamines and Propanolamines. In: Ullmann's Encyclopedia of Industrial Chemistry, Seventh Edition, 2009 Electronic Release (ed. Fiedler E., Grossmann G., Kersebohm D., Weiss G. and Witte C.). 7 th Electronic Release Edition. Wiley InterScience, New York, Article Online Posting Date: September 15, 2001. Online-Version under: DOI: 10.1002/14356007.a10_001
  Schirrmann et al. 2001. Jean-Pierre Schirmann and Paul Bourdauducq: Hydrazine. In: Ullmann's Encyclopedia of Industrial Chemistry, Seventh Edition, 2009 Electronic Release (ed. Fiedler E., Grossmann G., Kersebohm D., Weiss G. and Witte C.). 7 th Electronic Release Edition. Wiley InterScience, New York, Article Online Posting Date: June 15, 2001. Online-Version under: DOI: 10.1002/14356007.a13_177
  Uncertainty: Stoechiometric calculation
  properties: dry mass 1 kg, wet mass 1 kg
- benzene: 0.091432 kg; source Unger T A 1996; lognormal variance with pedigree 0.044, pedigree (4,5,4,1,1)
  (same comment as for 1-pentanol)
  properties: carbon content, fossil 0.923077, dry mass 1 kg, heating value, net 42.5 MJ, wet mass 1 kg
- biomethane, high pressure: 0.0094203 m3; source Althaus H.-J. 2000; lognormal variance with pedigree 0.044, pedigree (4,5,4,1,1)
  Stoichiometric calculation, assuming an efficiency of 95% per reaction step.
  EcoSpold01Location=CH
  Uncertainty: Stoechiometric calculation
  properties: carbon content, non-fossil 0.695496, dry mass 0.752 kg, heating value, net 34.97 MJ, wet mass 0.752 kg
  note on carbon content, non-fossil: Carbon content calculated from composition of the gas, 96% (in vol) methane, 2% (in vol) CO2 (Tab 13.3, ecoinvent v2.2 report 17). The composition in %vol was converted in % weight using density data of the different gases from tab 19.1, ecoinvent v2.2 report 17, part 19.
  note on heating value, net: Literature value, Source: United Nations Statistics Division (2018) International Recommendations for Energy Statistics (IRES). Available at: http://unstats.un.org/unsd/statcom/doc11/BG-IRES.pdf.
- butene, mixed: 0.037913 kg; source Unger T A 1996; lognormal variance with pedigree 0.044, pedigree (4,5,4,1,1)
  Stoichiometric calculation, assuming an efficiency of 95% per reaction step.
  Further references:
  Maki et al. 2000. Takao Maki and Kazuo Takeda: Benzoic Acid and Derivatives. In: Ullmann's Encyclopedia of Industrial Chemistry, Seventh Edition, 2009 Electronic Release (ed. Fiedler E., Grossmann G., Kersebohm D., Weiss G. and Witte C.). 7 th Electronic Release Edition. Wiley InterScience, New York, Article Online Posting Date: June 15, 2000. Online-Version under: DOI: 10.1002/14356007.a03_555
  EcoSpold01Location=RER
  Uncertainty: Stoechiometric calculation
  properties: carbon content, fossil 0.857143, dry mass 1 kg, heating value, net 45.3 MJ, wet mass 1 kg
  note on carbon content, fossil: With mixed butenes, the four isomers 1-butene, cis-2-butene, trans-2-butene and isobutene are summed up. They are unsaturated olefinic hydrocarbons with the formula C4H8 (ecoinvent v2.2 report 11_II). MW=56
  note on heating value, net: Indicative value. Reference: Fuels - Higher and Lower Calorific Values, available at: https://www.engineeringtoolbox.com/fuels-higher-calorific-values-d_169.html
- carbon monoxide: 0.1742 kg; source Unger T A 1996; lognormal variance with pedigree 0.044, pedigree (4,5,4,1,1)
  EcoSpold01Location=RER
  Stoichiometric calculation, assuming an efficiency of 95% per reaction step.
  Further references:
  Bipp et al. 2000 Hansjörg Bipp and Heinz Kieczka: Formamides. In: Ullmann's Encyclopedia of Industrial Chemistry, Seventh Edition, 2009 Electronic Release (ed. Fiedler E., Grossmann G., Kersebohm D., Weiss G. and Witte C.). 7 th Electronic Release Edition. Wiley InterScience, New York, Article Online Posting Date: June 15, 2000. Online-Version under: DOI: 10.1002/14356007.a12_001
  Schirrmann et al. 2001. Jean-Pierre Schirmann and Paul Bourdauducq: Hydrazine. In: Ullmann's Encyclopedia of Industrial Chemistry, Seventh Edition, 2009 Electronic Release (ed. Fiedler E., Grossmann G., Kersebohm D., Weiss G. and Witte C.). 7 th Electronic Release Edition. Wiley InterScience, New York, Article Online Posting Date: June 15, 2001. Online-Version under: DOI: 10.1002/14356007.a13_177
  Uncertainty: Stoechiometric calculation
  properties: carbon content, fossil 0.428571, dry mass 1 kg, heating value, net 12.99 MJ, wet mass 1 kg
  note on carbon content, fossil: CO. It is assumed that CO is produced from partial combustion of heavy heating oil.
- chemical factory, organics: 2.7102e-9 unit; lognormal variance with pedigree 0.448, pedigree (4,5,5,5,5)
  EcoSpold01Location=RER
  Estimation, based on a production capacity of 50,000 t per year and a plant life time of 50 years, therefore an amount of 4X10-10 units per kg of produced chemical is aded to the unit process of the respective chemical. The amount is accounted for each production step. This might be an overestimation in some multistep syntheses.
  Uncertainty: Estimation
- chlorine, liquid: 0.69588 kg; source Unger T A 1996; lognormal variance with pedigree 0.044, pedigree (4,5,4,1,1)
  EcoSpold01Location=RER
  Stoichiometric calculation, assuming an efficiency of 95% per reaction step.
  Further references:
  Kim et al. 2003. Kim S., Overcash M.: Energy in chemical manufacturing processes: gate-to-gate information for life cycle assessment. In: Journal of Chemical Technology & Biotechnology vol. 78, no. 9: 995-1005(11). 2003
  Uncertainty: Stoechiometric calculation
  properties: dry mass 1 kg, wet mass 1 kg
- dichloromethane: 0.135 kg; source Unger T A 1996; lognormal variance with pedigree 0.044, pedigree (4,5,4,1,1)
  (same comment as for 1-pentanol)
  properties: carbon content, fossil 0.142857, dry mass 1 kg, heating value, net 7.14 MJ, wet mass 1 kg
- electricity, medium voltage: 2.62903 kWh; source Gendorf 2000; lognormal variance with pedigree 0.044, pedigree (4,5,4,1,1)
  Estimation, assuming a default value, originated from calculation of avarage consumption of electricity and heat per kg of product (3.2 MJ kg-1), and a resulting amount of electricity of 0,333 kW for every reaction step per kg reaction product, considering that the demand is made up of a mix that inlcudes 38% electricity. Additionally, reaction steps are approximated with energy consumption data, assuming that inventory flows can be estimated using process data for basic operation steps, available for specific organic chemicals.
  Further references:
  Kim S., Overcash M.: Energy in chemical manufacturing processes: gate-to-gate information for life cycle assessment. In: Journal of Chemical Technology & Biotechnology vol. 78, no. 9: 995-1005(11). 2003
  EcoSpold01Location=UCTE
  Uncertainty: Estimation
- formic acid: 0.024031 kg; source Unger T A 1996; lognormal variance with pedigree 0.044, pedigree (4,5,4,1,1)
  Stoichiometric calculation, assuming an efficiency of 95% per reaction step.
  Further references:
  Frauenkron et al. 2001. Matthias Frauenkron, Johann-Peter Melder, Günther Ruider, Roland Rossbacher, Hartmut Höke: Ethanolamines and Propanolamines. In: Ullmann's Encyclopedia of Industrial Chemistry, Seventh Edition, 2009 Electronic Release (ed. Fiedler E., Grossmann G., Kersebohm D., Weiss G. and Witte C.). 7 th Electronic Release Edition. Wiley InterScience, New York, Article Online Posting Date: September 15, 2001. Online-Version under: DOI: 10.1002/14356007.a10_001
  EcoSpold01Location=RER
  Uncertainty: Stoechiometric calculation
  properties: carbon content, fossil 0.4, dry mass 1 kg, heating value, net 13.17 MJ, wet mass 1 kg
- heat, district or industrial, natural gas: 34.9364 MJ; source Gendorf 2000; lognormal variance with pedigree 0.044, pedigree (4,5,4,1,1)
  Estimation, assuming a default value, originated from calculation of avarage consumption of electricity and heat per kg of product (3.2 MJ kg-1), and a resulting amount of heat of 2 MJ for every reaction step per kg reaction product, considering that the demand is made up of a mix that includes 50% natural gas. Additionally, reaction steps are approximated with energy consumption data, assuming that inventory flows can be estimated using process data for basic operation steps, available for specific organic chemicals.
  Further references:
  Kim S., Overcash M.: Energy in chemical manufacturing processes: gate-to-gate information for life cycle assessment. In: Journal of Chemical Technology & Biotechnology vol. 78, no. 9: 995-1005(11). 2003
  Uncertainty: Estimation
  properties: heating value, net 1 MJ
- heat, district or industrial, other than natural gas: 19.5 MJ; source Gendorf 2000; lognormal variance with pedigree 0.044, pedigree (4,5,4,1,1)
  Estimation, assuming a default value, originated from calculation of avarage consumption of electricity and heat per kg of product (3.2 MJ kg-1), and a resulting amount of heat of 2 MJ for every reaction step per kg reaction product, considering that the demand is made up of a mix that inlcudes 12% steam from external energy sources. Additionally, reaction steps are approximated with energy consumption data, assuming that inventory flows can be estimated using process data for basic operation steps, available for specific organic chemicals.
  Further references:
  Kim S., Overcash M.: Energy in chemical manufacturing processes: gate-to-gate information for life cycle assessment. In: Journal of Chemical Technology & Biotechnology vol. 78, no. 9: 995-1005(11). 2003
  Uncertainty: Estimation
  properties: heating value, net 1 MJ
- hydrochloric acid, without water, in 30% solution state: 0.20833 kg; source Unger T A 1996; lognormal variance with pedigree 0.044, pedigree (4,5,4,1,1)
  EcoSpold01Location=RER
  Stoichiometric calculation, assuming an efficiency of 100%.
  Further references:
  Cheung et al. 2000. Hosea Cheung, Robin S. Tanke, G. Paul Torrence: Acetic Acid. In: Ullmann's Encyclopedia of Industrial Chemistry, Seventh Edition, 2009 Electronic Release (ed. Fiedler E., Grossmann G., Kersebohm D., Weiss G. and Witte C.). 7 th Electronic Release Edition. Wiley InterScience, New York, Article Online Posting Date: June 15, 2000. Online-Version under: DOI: 10.1002/14356007.a01_045
  Uncertainty: Stoechiometric calculation
  properties: dry mass 1 kg, heating value, net 3.32 MJ, wet mass 1 kg
- hydrogen fluoride: 0.022272 kg; source Unger T A 1996; lognormal variance with pedigree 0.044, pedigree (4,5,4,1,1)
  EcoSpold01Location=GLO
  Stoichiometric calculation, assuming an efficiency of 95% per reaction step.
  Uncertainty: Stoechiometric calculation
  properties: dry mass 1 kg, heating value, net 6.06 MJ, wet mass 1 kg
- hydrogen peroxide, without water, in 50% solution state: 0.016613 kg; source Unger T A 1996; lognormal variance with pedigree 0.044, pedigree (4,5,4,1,1)
  (same comment as for acetone, liquid)
  properties: dry mass 1 kg, heating value, net 7.13 MJ, wet mass 1 kg
- hydrogen sulfide: 0.013738 kg; source Unger T A 1996; lognormal variance with pedigree 0.044, pedigree (4,5,4,1,1)
  Stoichiometric calculation, assuming an efficiency of 95% per reaction step.
  Further references:
  Lange et al. 2000. Ludwig Lange and Wolfgang Triebel: Sulfides, Polysulfides, and Sulfanes. In: Ullmann's Encyclopedia of Industrial Chemistry, Seventh Edition, 2009 Electronic Release (ed. Fiedler E., Grossmann G., Kersebohm D., Weiss G. and Witte C.). 7 th Electronic Release Edition. Wiley InterScience, New York, Article Online Posting Date: June 15, 2000. Online-Version under: DOI: 10.1002/14356007.a25_443
  EcoSpold01Location=RER
  Uncertainty: Stoechiometric calculation
  properties: dry mass 1 kg, heating value, net 7.11 MJ, wet mass 1 kg
- hydrogen, liquid: 0.0031451 kg; source Unger T A 1996; lognormal variance with pedigree 0.044, pedigree (4,5,4,1,1)
  EcoSpold01Location=RER
  Stoichiometric calculation, assuming an efficiency of 95% per reaction step.
  Further references:
  Maki et al. 2000. Takao Maki and Kazuo Takeda: Benzoic Acid and Derivatives. In: Ullmann's Encyclopedia of Industrial Chemistry, Seventh Edition, 2009 Electronic Release (ed. Fiedler E., Grossmann G., Kersebohm D., Weiss G. and Witte C.). 7 th Electronic Release Edition. Wiley InterScience, New York, Article Online Posting Date: June 15, 2000. Online-Version under: DOI: 10.1002/14356007.a03_555
  Uncertainty: Stoechiometric calculation
  properties: dry mass 1 kg, heating value, net 120.21 MJ, wet mass 1 kg
- inert waste, for final disposal: -0.00042845 kg; lognormal variance with pedigree 0.036, pedigree (4,5,1,1,1)
  EcoSpold01Location=CH
  Stoichiometric calculation
  Uncertainty: Stoechiometric calculation
  production volume
    Calculated from the production volume of cyclic N-compound in proportion to the respective output amounts.
  properties: dry mass 0.995 kg, water content 0.00502513, wet mass 1 kg
- liquefied petroleum gas: 0.0285598, 0.000145249 kg (2 suppliers, which the file names only by identifier); sum of these 0.028705 kg; source Unger T A 1996; lognormal variance with pedigree 0.044, pedigree (4,5,4,1,1)
  EcoSpold01Location=CH
  Stoichiometric calculation, assuming an efficiency of 95% per reaction step.
  Uncertainty: Stoechiometric calculation
  properties: carbon content, fossil 0.821863, dry mass 1 kg, heating value, net 45.5 MJ, wet mass 1 kg
- lithium: 0.0074054 kg; source Unger T A 1996; lognormal variance with pedigree 0.044, pedigree (4,5,4,1,1)
  Stoichiometric calculation, assuming an efficiency of 95% per reaction step.
  EcoSpold01Location=GLO
  Uncertainty: Stoechiometric calculation
  properties: dry mass 1 kg, wet mass 1 kg
- methanol: 0.062949 kg; source Unger T A 1996; lognormal variance with pedigree 0.044, pedigree (4,5,4,1,1)
  EcoSpold01Location=GLO
  Stoichiometric calculation, assuming an efficiency of 95% per reaction step.
  Further references:
  Lange et al. 2000. Ludwig Lange and Wolfgang Triebel: Sulfides, Polysulfides, and Sulfanes. In: Ullmann's Encyclopedia of Industrial Chemistry, Seventh Edition, 2009 Electronic Release (ed. Fiedler E., Grossmann G., Kersebohm D., Weiss G. and Witte C.). 7 th Electronic Release Edition. Wiley InterScience, New York, Article Online Posting Date: June 15, 2000. Online-Version under: DOI: 10.1002/14356007.a25_443
  Lyday 2000. Phyllis A. Lyday: Iodine and Iodine Compounds. In: Ullmann's Encyclopedia of Industrial Chemistry, Seventh Edition, 2009 Electronic Release (ed. Fiedler E., Grossmann G., Kersebohm D., Weiss G. and Witte C.). 7 th Electronic Release Edition. Wiley InterScience, New York, Article Online Posting Date: June 15, 2000. Online-Version under: DOI: 10.1002/14356007.a14_381
  Uncertainty: Stoechiometric calculation
  properties: carbon content, fossil 0.375, dry mass 1 kg, heating value, net 20 MJ, wet mass 1 kg
  note on heating value, net: Based on literature, page 533, Report 17: Jungbluth, N., Chudacoff, M., Dauriat, A., Dinkel, F., Doka, G., Faist Emmenegger, M., Gnansounou, E., Kljun, N., Schleiss, K., Spielmann, M., Stettler, C., Sutter, J. 2007: Life Cycle Inventories of Bioenergy. ecoinvent report No. 17, Swiss Centre for Life Cycle Inventories, Dübendorf, CH.
- o-dichlorobenzene: 0.14165 kg; source Unger T A 1996; lognormal variance with pedigree 0.044, pedigree (4,5,4,1,1)
  (same comment as for acetone, liquid)
  properties: carbon content, fossil 0.493151, dry mass 1 kg, heating value, net 18.15 MJ, wet mass 1 kg
- oxygen, liquid: 0.029247 kg; source Unger T A 1996; lognormal variance with pedigree 0.044, pedigree (4,5,4,1,1)
  EcoSpold01Location=RER
  Stoichiometric calculation, assuming an efficiency of 100% per reaction step.
  Further references:
  Maki et al. 2000. Takao Maki and Kazuo Takeda: Benzoic Acid and Derivatives. In: Ullmann's Encyclopedia of Industrial Chemistry, Seventh Edition, 2009 Electronic Release (ed. Fiedler E., Grossmann G., Kersebohm D., Weiss G. and Witte C.). 7 th Electronic Release Edition. Wiley InterScience, New York, Article Online Posting Date: June 15, 2000. Online-Version under: DOI: 10.1002/14356007.a03_555
  Uncertainty: Stoechiometric calculation
  properties: dry mass 1 kg, wet mass 1 kg
- phenol: 0.042851 kg; source Unger T A 1996; lognormal variance with pedigree 0.044, pedigree (4,5,4,1,1)
  (same comment as for 1-pentanol)
  properties: carbon content, fossil 0.765957, dry mass 1 kg, heating value, net 30.93 MJ, wet mass 1 kg
- phosphorus, white, liquid: 0.015774 kg; source Unger T A 1996; lognormal variance with pedigree 0.044, pedigree (4,5,4,1,1)
  EcoSpold01Location=RER
  Stoichiometric calculation, assuming an efficiency of 95% per reaction step.
  Further references:
  Lyday 2000. Phyllis A. Lyday: Iodine and Iodine Compounds. In: Ullmann's Encyclopedia of Industrial Chemistry, Seventh Edition, 2009 Electronic Release (ed. Fiedler E., Grossmann G., Kersebohm D., Weiss G. and Witte C.). 7 th Electronic Release Edition. Wiley InterScience, New York, Article Online Posting Date: June 15, 2000. Online-Version under: DOI: 10.1002/14356007.a14_381
  Uncertainty: Stoechiometric calculation
  properties: dry mass 1 kg, wet mass 1 kg
- propanal: 0.031895 kg; source Unger T A 1996; lognormal variance with pedigree 0.044, pedigree (4,5,4,1,1)
  (same comment as for hydrogen, liquid)
  properties: carbon content, fossil 0.62069, dry mass 1 kg, heating value, net 31.32 MJ, wet mass 1 kg
- propylene glycol, liquid: 0.029704 kg; source Unger T A 1996; lognormal variance with pedigree 0.044, pedigree (4,5,4,1,1)
  (same comment as for acetone, liquid)
  properties: carbon content, fossil 0.473684, dry mass 1 kg, heating value, net 27.09 MJ, wet mass 1 kg
- propylene oxide, liquid: 0.033573 kg; source Unger T A 1996; lognormal variance with pedigree 0.044, pedigree (4,5,4,1,1)
  (same comment as for formic acid)
  properties: carbon content, fossil 0.62069, dry mass 1 kg, heating value, net 31.32 MJ, wet mass 1 kg
- silicon, metallurgical grade: 0.0085691 kg; source Unger T A 1996; lognormal variance with pedigree 0.044, pedigree (4,5,4,1,1)
  Stoichiometric calculation, assuming an efficiency of 95% per reaction step.
  EcoSpold01Location=NO
  Uncertainty: Stoechiometric calculation
  properties: dry mass 1 kg, wet mass 1 kg
- sodium cyanide: 0.066725 kg; source Unger T A 1996; lognormal variance with pedigree 0.044, pedigree (4,5,4,1,1)
  (same comment as for 1-pentanol)
  properties: carbon content, fossil 0.244898, dry mass 1 kg, heating value, net 7.43 MJ, wet mass 1 kg
- sodium hydroxide, without water, in 50% solution state: 0.82229 kg; source Unger T A 1996; lognormal variance with pedigree 0.044, pedigree (4,5,4,1,1)
  Stoichiometric calculation, assuming an efficiency of 100%.
  Further references:
  Bipp et al. 2000. Hansjörg Bipp and Heinz Kieczka: Formamides. In: Ullmann's Encyclopedia of Industrial Chemistry, Seventh Edition, 2009 Electronic Release (ed. Fiedler E., Grossmann G., Kersebohm D., Weiss G. and Witte C.). 7 th Electronic Release Edition. Wiley InterScience, New York, Article Online Posting Date: June 15, 2000. Online-Version under: DOI: 10.1002/14356007.a12_001
  Schirrmann et al. 2001. Jean-Pierre Schirmann and Paul Bourdauducq: Hydrazine. In: Ullmann's Encyclopedia of Industrial Chemistry, Seventh Edition, 2009 Electronic Release (ed. Fiedler E., Grossmann G., Kersebohm D., Weiss G. and Witte C.). 7 th Electronic Release Edition. Wiley InterScience, New York, Article Online Posting Date: June 15, 2001. Online-Version under: DOI: 10.1002/14356007.a13_177
  EcoSpold01Location=RER
  Uncertainty: Stoechiometric calculation
  properties: dry mass 1 kg, heating value, net 3.03 MJ, wet mass 1 kg
- sodium hypochlorite, without water, in 15% solution state: 0.2423 kg; source Unger T A 1996; lognormal variance with pedigree 0.044, pedigree (4,5,4,1,1)
  EcoSpold01Location=RER
  Stoichiometric calculation, assuming an efficiency of 95% per reaction step.
  Further references:
  Schirrmann et al. 2001. Jean-Pierre Schirmann and Paul Bourdauducq: Hydrazine. In: Ullmann's Encyclopedia of Industrial Chemistry, Seventh Edition, 2009 Electronic Release (ed. Fiedler E., Grossmann G., Kersebohm D., Weiss G. and Witte C.). 7 th Electronic Release Edition. Wiley InterScience, New York, Article Online Posting Date: June 15, 2001. Online-Version under: DOI: 10.1002/14356007.a13_177
  Uncertainty: Stoechiometric calculation
  properties: dry mass 1 kg, wet mass 1 kg
- sodium methoxide: 0.020728 kg; source Unger T A 1996; lognormal variance with pedigree 0.044, pedigree (4,5,4,1,1)
  (same comment as for lithium)
  properties: carbon content, fossil 0.222222, dry mass 1 kg, heating value, net 13.47 MJ, wet mass 1 kg
- sodium tetrahydridoborate: 0.011187 kg; source Unger T A 1996; lognormal variance with pedigree 0.044, pedigree (4,5,4,1,1)
  (same comment as for lithium)
  properties: dry mass 1 kg, heating value, net 12.81 MJ, wet mass 1 kg
- sulfur dioxide, liquid: 0.037681 kg; source Unger T A 1996; lognormal variance with pedigree 0.044, pedigree (4,5,4,1,1)
  (same comment as for 1-pentanol)
  properties: dry mass 1 kg, wet mass 1 kg
- toluene, liquid: 0.2181 kg; source Unger T A 1996; lognormal variance with pedigree 0.044, pedigree (4,5,4,1,1)
  Stoichiometric calculation, assuming an efficiency of 95% per reaction step.
  Further references:
  Kim et al. 2003. Kim S., Overcash M.: Energy in chemical manufacturing processes: gate-to-gate information for life cycle assessment. In: Journal of Chemical Technology & Biotechnology vol. 78, no. 9: 995-1005(11). 2003
  Maki et al. 2000. Takao Maki and Kazuo Takeda: Benzoic Acid and Derivatives. In: Ullmann's Encyclopedia of Industrial Chemistry, Seventh Edition, 2009 Electronic Release (ed. Fiedler E., Grossmann G., Kersebohm D., Weiss G. and Witte C.). 7 th Electronic Release Edition. Wiley InterScience, New York, Article Online Posting Date: June 15, 2000. Online-Version under: DOI: 10.1002/14356007.a03_555
  EcoSpold01Location=RER
  Uncertainty: Stoechiometric calculation
  properties: carbon content, fossil 0.913043, dry mass 1 kg, heating value, net 38.17 MJ, wet mass 1 kg
- water, decarbonised: 0.00646719, 2.03699e-5, 0.0320801, 0.0212654, 0.00117397 kg (5 suppliers, which the file names only by identifier); sum of these 0.061007 kg; source Unger T A 1996; lognormal variance with pedigree 0.044, pedigree (4,5,4,1,1)
  EcoSpold01Location=RER
  Stoichiometric calculation, assuming an efficiency of 100%.
  Uncertainty: Stoechiometric calculation
  properties: wet mass 1 kg

## Inputs from nature
- Bromine [natural resource, in water]: 0.73915 kg; name bromine_input; source Unger T A 1996; lognormal variance with pedigree 0.044, pedigree (4,5,4,1,1)
  0.23% Br in water; Stoichiometric calculation, assuming an efficiency of 95% per reaction step.
  Uncertainty: Stoechiometric calculation
- Iodine [natural resource, in water]: 0.073065 kg; name iodine_input; source Unger T A 1996; lognormal variance with pedigree 0.044, pedigree (4,5,4,1,1)
  0.03% I; Stoichiometric calculation, assuming an efficiency of 95% per reaction step.
  Further references:
  Lyday 2000. Phyllis A. Lyday: Iodine and Iodine Compounds. In: Ullmann's Encyclopedia of Industrial Chemistry, Seventh Edition, 2009 Electronic Release (ed. Fiedler E., Grossmann G., Kersebohm D., Weiss G. and Witte C.). 7 th Electronic Release Edition. Wiley InterScience, New York, Article Online Posting Date: June 15, 2000. Online-Version under: DOI: 10.1002/14356007.a14_381
  Uncertainty: Stoechiometric calculation
- Water, cooling, unspecified natural origin [natural resource, in water]: 0.1586 m3; name water_cooling_UNO_input; source Gendorf 2000; lognormal variance with pedigree 0.044, pedigree (4,5,4,1,1)
  Estimation (24 kg cooling water per kg produced chemical per step).
  Uncertainty: Estimation
- Water, salt, sole [natural resource, in water]: 0.56492 m3; name water_salt_sole_input; = ((bromine_input/0.0023)+( iodine_input/0.0003))/1000; lognormal variance with pedigree 0.044, pedigree (4,5,4,1,1)
  There are intermediates containing bromine and iodine in this process and this input is used as an input in the bromine and iodine production.
  The concentration of bromine in water, salt, sole is 0.23% = 0.0023kg/kg. Cross-referenced: 0.25% (Ullmann's encyclopedia), 0.4% (USGS). The concentration of iodine in water, salt, sole is 0.03% = 0.0003kg/kg. Cross-referenced: 0.015% - 0.12% (Ullmann's encyclopedia).
  There are intermediates containing bromine and iodine in this process and this input is used as an input in the bromine and iodine production.
  The concentration of bromine in water, salt, sole is 0.23% = 0.0023kg/kg. Cross-referenced: 0.25% (Ullmann's encyclopedia), 0.4% (USGS). The concentration of iodine in water, salt, sole is 0.03% = 0.0003kg/kg. Cross-referenced: 0.015% - 0.12% (Ullmann's encyclopedia).
  Uncertainty: Stoechiometric calculation

## Emissions to nature
- 1,2-Dichlorobenzene [air, urban air close to ground]: 0.00015019 kg; lognormal variance with pedigree 0.188, pedigree (4,5,5,5,5)
  Estimation, based on the assumption that 0.2% of volatile input materials is emitted to air occurring from the purge vent, the destillation vent and fugitive emission sources.
  Uncertainty: Estimation
- 1-Pentanol [air, urban air close to ground]: 9.0524e-5 kg; lognormal variance with pedigree 0.188, pedigree (4,5,5,5,5)
  (same comment as for 1,2-Dichlorobenzene)
- 1-Pentene [air, urban air close to ground]: 6.8408e-5 kg; lognormal variance with pedigree 0.188, pedigree (4,5,5,5,5)
  (same comment as for 1,2-Dichlorobenzene)
- 2-Methyl-1-propanol [air, urban air close to ground]: 7.5826e-5 kg; lognormal variance with pedigree 0.188, pedigree (4,5,5,5,5)
  (same comment as for 1,2-Dichlorobenzene)
- Acetic acid [air, urban air close to ground]: 5.4703e-5 kg; lognormal variance with pedigree 0.188, pedigree (4,5,5,5,5)
  (same comment as for 1,2-Dichlorobenzene)
- Acetone [air, urban air close to ground]: 6.9749e-5 kg; lognormal variance with pedigree 0.188, pedigree (4,5,5,5,5)
  (same comment as for 1,2-Dichlorobenzene)
- Ammonia [air, urban air close to ground]: 0.00058553 kg; lognormal variance with pedigree 0.218, pedigree (4,5,5,5,5)
  (same comment as for 1,2-Dichlorobenzene)
- Benzene [air, urban air close to ground]: 0.00018286 kg; lognormal variance with pedigree 0.188, pedigree (4,5,5,5,5)
  (same comment as for 1,2-Dichlorobenzene)
- Carbon dioxide, fossil [air, urban air close to ground]: 0.70374 kg; lognormal variance with pedigree 0.1786, pedigree (4,5,5,5,5)
  Estimation, based on the assumption that 0.2% of volatile input materials is emitted to air occurring from the purge vent, the destillation vent and fugitive emission sources. Remaining gases like CH4 or CO are oxidated to CO2. The carbon contained in the removed carbon compounds from wastewater treatment was accounted as CO2 emissions to air (assuming a removal efficiency of 90%).
  Uncertainty: Estimation
- Carbon monoxide, fossil [air, urban air close to ground]: 0.00034839 kg; lognormal variance with pedigree 0.798, pedigree (4,5,5,5,5)
  (same comment as for 1,2-Dichlorobenzene)
- Chloramine [air, urban air close to ground]: 0.00031729 kg; lognormal variance with pedigree 0.188, pedigree (4,5,5,5,5)
  (same comment as for 1,2-Dichlorobenzene)
- Chlorine [air, urban air close to ground]: 0.00054624 kg; lognormal variance with pedigree 0.188, pedigree (4,5,5,5,5)
  (same comment as for 1,2-Dichlorobenzene)
- Formamide [air, urban air close to ground]: 0.00016556 kg; lognormal variance with pedigree 0.188, pedigree (4,5,5,5,5)
  (same comment as for 1,2-Dichlorobenzene)
- Formic acid [air, urban air close to ground]: 4.8062e-5 kg; lognormal variance with pedigree 0.188, pedigree (4,5,5,5,5)
  (same comment as for 1,2-Dichlorobenzene)
- Hydrogen [air, urban air close to ground]: 6.2902e-6 kg; lognormal variance with pedigree 0.188, pedigree (4,5,5,5,5)
  (same comment as for 1,2-Dichlorobenzene)
- Methane, dichloro-, HCC-30 [air, urban air close to ground]: 0.00026999 kg; lognormal variance with pedigree 0.188, pedigree (4,5,5,5,5)
  (same comment as for 1,2-Dichlorobenzene)
- Methane, fossil [air, urban air close to ground]: 1.8841e-5 kg; lognormal variance with pedigree 0.188, pedigree (4,5,5,5,5)
  (same comment as for 1,2-Dichlorobenzene)
- Methanol [air, urban air close to ground]: 0.0001259 kg; lognormal variance with pedigree 0.188, pedigree (4,5,5,5,5)
  (same comment as for 1,2-Dichlorobenzene)
- Phenol [air, urban air close to ground]: 8.5701e-5 kg; lognormal variance with pedigree 0.188, pedigree (4,5,5,5,5)
  (same comment as for 1,2-Dichlorobenzene)
- Propanal [air, urban air close to ground]: 6.3789e-5 kg; lognormal variance with pedigree 0.188, pedigree (4,5,5,5,5)
  (same comment as for 1,2-Dichlorobenzene)
- Propane [air, urban air close to ground]: 0.00019519 kg; lognormal variance with pedigree 0.188, pedigree (4,5,5,5,5)
  (same comment as for 1,2-Dichlorobenzene)
- Propylene oxide [air, urban air close to ground]: 6.7146e-5 kg; lognormal variance with pedigree 0.188, pedigree (4,5,5,5,5)
  (same comment as for 1,2-Dichlorobenzene)
- Sulfur dioxide [air, urban air close to ground]: 7.5362e-5 kg; lognormal variance with pedigree 0.1786, pedigree (4,5,5,5,5)
  (same comment as for 1,2-Dichlorobenzene)
- Toluene [air, urban air close to ground]: 0.00043621 kg; lognormal variance with pedigree 0.188, pedigree (4,5,5,5,5)
  (same comment as for 1,2-Dichlorobenzene)
- Water [air, unspecified]: 0.17729 m3; name water_to_air_unspecified; = (water_decarbonised_input/1000*fraction_WDC_to_air)+(water_cooling_UNO_input*fraction_CW_to_air)+(water_salt_sole_input*fraction_PW_to_air); lognormal variance with pedigree 0.0487, pedigree (2,2,4,1,1)
  Calculated value based on literature values and expert opinion. See comments in the parametres' comment field.
  property fraction, origin: fresh water 0.000133342; name fraction_origin_fresh_water
  property fraction, origin: salt water 0.653216; name fraction_origin_salt_water
  property fraction, origin: unspecified 0.34665; name fraction_origin_unspecified
- 1,2-Dichlorobenzene [water, surface water]: 0.00036045 kg; lognormal variance with pedigree 0.448, pedigree (4,5,5,5,5)
  Estimation, assuming that the remaining amount of unreacted input materials leave the production process with the wastewater, wich is further treated in an internal wastewater plant.
  Uncertainty: Estimation
- 1-Pentanol [water, surface water]: 0.00021726 kg; lognormal variance with pedigree 0.448, pedigree (4,5,5,5,5)
  (same comment as for 1,2-Dichlorobenzene)
- 1-Pentene [water, surface water]: 0.00016418 kg; lognormal variance with pedigree 0.448, pedigree (4,5,5,5,5)
  (same comment as for 1,2-Dichlorobenzene)
- 2-Methyl-1-propanol [water, surface water]: 0.00018198 kg; lognormal variance with pedigree 0.448, pedigree (4,5,5,5,5)
  (same comment as for 1,2-Dichlorobenzene)
- Acetic acid [water, surface water]: 0.0030303 kg; lognormal variance with pedigree 0.448, pedigree (4,5,5,5,5)
  (same comment as for 1,2-Dichlorobenzene)
- Acetone [water, surface water]: 0.00017437 kg; lognormal variance with pedigree 0.448, pedigree (4,5,5,5,5)
  (same comment as for 1,2-Dichlorobenzene)
- Acetyl chloride [water, surface water]: 0.00017067 kg; lognormal variance with pedigree 0.448, pedigree (4,5,5,5,5)
  (same comment as for 1,2-Dichlorobenzene)
- Ammonium [water, surface water]: 0.034984 kg; lognormal variance with pedigree 0.188, pedigree (4,5,5,5,5)
  Estimation, assuming that the remaining amount of unreacted input materials leave the production process with the wastewater, wich is further treated in an internal wastewater plant. For the nitrogen containing compounds within the wastewater a removal efficiency of 50% was assumed. The nitrogen emitted to air (N2) is neglected.
  Uncertainty: Estimation
- Benzene [water, surface water]: 0.00043887 kg; lognormal variance with pedigree 0.448, pedigree (4,5,5,5,5)
  (same comment as for 1,2-Dichlorobenzene)
- Borate [water, surface water]: 0.0165 kg; lognormal variance with pedigree 0.448, pedigree (4,5,5,5,5)
  (same comment as for 1,2-Dichlorobenzene)
- Boron [water, surface water]: 0.00013247 kg; lognormal variance with pedigree 0.798, pedigree (4,5,5,5,5)
  (same comment as for 1,2-Dichlorobenzene)
- Bromide [water, surface water]: 0.62376 kg; lognormal variance with pedigree 0.798, pedigree (4,5,5,5,5)
  (same comment as for 1,2-Dichlorobenzene)
- Chloramine [water, surface water]: 0.0028313 kg; lognormal variance with pedigree 0.448, pedigree (4,5,5,5,5)
  (same comment as for Ammonium)
- Chloride [water, surface water]: 0.63663 kg; lognormal variance with pedigree 0.448, pedigree (4,5,5,5,5)
  (same comment as for 1,2-Dichlorobenzene)
- Fluoride [water, surface water]: 0.0037288 kg; lognormal variance with pedigree 0.188, pedigree (4,5,5,5,5)
  (same comment as for 1,2-Dichlorobenzene)
- Formamide [water, surface water]: 0.00039735 kg; lognormal variance with pedigree 0.448, pedigree (4,5,5,5,5)
  (same comment as for Ammonium)
- Formic acid [water, surface water]: 0.00011535 kg; lognormal variance with pedigree 0.448, pedigree (4,5,5,5,5)
  (same comment as for 1,2-Dichlorobenzene)
- Iodide [water, surface water]: 0.066344 kg; lognormal variance with pedigree 0.798, pedigree (4,5,5,5,5)
  (same comment as for 1,2-Dichlorobenzene)
- Lithium I [water, surface water]: 0.0073702 kg; lognormal variance with pedigree 0.798, pedigree (4,5,5,5,5)
  (same comment as for 1,2-Dichlorobenzene)
- Methane, dichloro-, HCC-30 [water, surface water]: 0.00037018 kg; lognormal variance with pedigree 0.448, pedigree (4,5,5,5,5)
  (same comment as for 1,2-Dichlorobenzene)
- Methanol [water, surface water]: 0.00030216 kg; lognormal variance with pedigree 0.448, pedigree (4,5,5,5,5)
  (same comment as for 1,2-Dichlorobenzene)
- Phenol [water, surface water]: 0.00020568 kg; lognormal variance with pedigree 0.448, pedigree (4,5,5,5,5)
  (same comment as for 1,2-Dichlorobenzene)
- Phosphate [water, surface water]: 0.0099242 kg; lognormal variance with pedigree 0.188, pedigree (4,5,5,5,5)
  (same comment as for 1,2-Dichlorobenzene)
- Propanal [water, surface water]: 0.00015309 kg; lognormal variance with pedigree 0.448, pedigree (4,5,5,5,5)
  (same comment as for 1,2-Dichlorobenzene)
- Propylene oxide [water, surface water]: 0.00016115 kg; lognormal variance with pedigree 0.448, pedigree (4,5,5,5,5)
  (same comment as for 1,2-Dichlorobenzene)
- Silicon [water, surface water]: 0.0013719 kg; lognormal variance with pedigree 0.798, pedigree (4,5,5,5,5)
  (same comment as for 1,2-Dichlorobenzene)
- Sodium I [water, surface water]: 0.55018 kg; lognormal variance with pedigree 0.798, pedigree (4,5,5,5,5)
  (same comment as for 1,2-Dichlorobenzene)
- Sulfate [water, surface water]: 0.0019395 kg; lognormal variance with pedigree 0.188, pedigree (4,5,5,5,5)
  (same comment as for 1,2-Dichlorobenzene)
- Toluene [water, surface water]: 0.00036988 kg; lognormal variance with pedigree 0.448, pedigree (4,5,5,5,5)
  (same comment as for 1,2-Dichlorobenzene)
- Water [water, unspecified]: 0.546291 m3; name water_to_water_unspecified; = (water_decarbonised_input/1000)*(1-fraction_WDC_to_air)+water_cooling_UNO_input*(1-fraction_CW_to_air)+water_salt_sole_input*(1-fraction_PW_to_air); lognormal variance with pedigree 0.0487, pedigree (2,2,4,1,1)
  (same comment as for Water)
  property carbon content, fossil 0; name C_content_fossil
  property carbon content, non-fossil 0; name C_content_non_fossil
  property fraction, origin: fresh water 6.84009e-5; name fraction_origin_fresh_water_Ww
  property fraction, origin: salt water 0.82211; name fraction_origin_salt_water_Ww
  property fraction, origin: unspecified 0.177822; name fraction_origin_unspecified_Ww
  property water in wet mass 1000 kg; name WWM

## Sampling procedure
Literature data

## Review by Thomas Nemecek 2010-03-11
Passed.
none

## Review by Roland Hischier 2011-11-14
Transfer of documentation done.
