# fuel cell production, polymer electrolyte membrane, 2kW electrical, future

Dataset: EcoSpold 2, unit process
Geography: RoW
Time period: 2000-01-01 to 2022-12-31
Technology level: current
Classification: ISIC rev.4 ecoinvent: 2790:Manufacture of other electrical equipment
Classification: EcoSpold01Categories: natural gas/cogeneration
Synonyms: proton exchange membrane fuel cell; PEMFC; polymer electrolyte fuel cell; PEFC; Polymer Elektrolyt Membran Brennstoffzelle; Membran Brennstoffzelle
Tags: ConvertedDataset
Scenario: Business-as-Usual
System model: Allocation at the point of substitution
Generated by: Alex Primas
Published in: Primas A. 2007
Database: ecoinvent
isCopyrightProtected: true

## General comment
The module reflects a polymer electrolyte membrane (PEM) fuel cell with 2 kW electrical output. Inventory based on information from literature for future production based on manufacturer data. Life time operation is 15 years or 80'000 h. Stack replacement every 6th. year.
[This dataset was already contained in the ecoinvent database version 2. It was not individually updated during the transfer to ecoinvent version 3. Life Cycle Impact Assessment results may still have changed, as they are affected by changes in the supply chain, i.e. in other datasets. This dataset was generated following the ecoinvent quality guidelines for version 2. It may have been subject to central changes described in the ecoinvent version 3 change report (http://www.ecoinvent.org/database/ecoinvent-version-3/reports-of-changes/), and the results of the central updates were reviewed extensively. The changes added e.g. consistent water flows and other information throughout the database. The documentation of this dataset can be found in the ecoinvent reports of version 2, which are still available via the ecoinvent website. The change report linked above covers all central changes that were made during the conversion process.]

## Included activities end
The module includes the most important materials used for production, the energy needed for production, planning and engineering. Also included is the transport of the raw materials the installation on the site.

## Geography
Process applicable in central European conditions.

## Technology
polymer electrolyte membrane (PEM) fuel cell for stationary cogeneration. Performance, stack lifetime and catalyst use according to expected future values for a serial product. Operation with connection to low pressure gas network. Electrical efficiency 32%, total efficiency 87%.

## Parameters
- fraction, process water, to air: 0.15 dimensionless; lognormal variance with pedigree 0.092025, pedigree (4,4,3,2,4)

## Reference product
- fuel cell, polymer electrolyte membrane, 2kW electrical, future: 1 unit; By-product classification allocatable product; CPC 46410: Primary cells and primary batteries
  EcoSpold01Location=CH
  production volume 3.96633 unit
    This is a placeholder value that does not reflect real-world production volumes. This dataset does not currently require a real-world production volume to work in the database framework, and no actual data were collected yet. This has no negative effect on the results of the ecoinvent database.
  property price 575.124 EUR2005
    Calculated based on inputs: The price of the product has been calculated as a sum of the values of the material and energy inputs for this product. This value is therefore a rough estimation. It may underestimate the real price since there are additional expenses when producing any product. These expences can include for example labour costs, treatment of waste materials and profit for the producer. Please consider carefully whether this level of data quality is acceptable for your application.
  properties: carbon allocation 0 kg, carbon content 0

## Inputs from technosphere
- activated carbon, granular: 0.5 kg; lognormal variance with pedigree 0.282, pedigree (4,4,5,5,5)
  Same amount as initial proxy (charcoal) for activated carbon.
  Uncertainty: proxy for activated carbon
  property carbon content, fossil 0.81; name GAC_C_content_fossil
  property carbon content, non-fossil 0; name GAC_C_content_non_fossil
  property dry mass 0.97 kg; name GAC_DM
  property water content 0.030928; name GAC_water_content
  property water in wet mass 0.03 kg; name GAC_WWM
  properties: heating value, net 30.23 MJ, wet mass 1 kg
  note on carbon content, fossil: Literature value. From Biomass and Bioenergy: Processing and Properties (2014) edited by Khalid Rehman Hakeem, Mohammad Jawaid, Umer Rashid (p. 252). Carbon content is in the range of 72-90%, an average value of 81% is taken.
- aluminium, wrought alloy: 4.6 kg; lognormal variance with pedigree 0.0726, pedigree (2,4,5,5,3)
  EcoSpold01Location=RER
  Value for expected serial production
  Uncertainty: value for expected serial production
  properties: dry mass 1 kg, wet mass 1 kg
- building, hall, steel construction: 0.0042 m2; lognormal variance with pedigree 0.372, pedigree (4,4,5,5,1)
  EcoSpold01Location=CH
  Rough estimation based on company data
  Uncertainty: rough estimation based on company data
- building, multi-storey: 0.025 m3; lognormal variance with pedigree 0.372, pedigree (4,4,5,5,1)
  Rough estimation based on company data
  EcoSpold01Location=RER
  Uncertainty: rough estimation based on company data
- cast iron: 1.6 kg; lognormal variance with pedigree 0.0726, pedigree (2,4,5,5,3)
  Value for expected serial production
  EcoSpold01Location=RER
  Uncertainty: value for expected serial production
  properties: carbon content, fossil 0.04, dry mass 1 kg, wet mass 1 kg
  note on carbon content, fossil: Cast iron is made by remelting pig iron in small furnaces (e.g. cupola furnaces or electric arc furnaces) and poured into moulds to make castings. It usually contains 2% to 6% carbon (ecoinvent v2.2 report 10_partII). An average content of 4% was considered
- electricity, low voltage: 1.13222, 2.2438, 21.5541, 0.384493, 7.70338, 0.0699217, 5.33967, 1.5724 kWh (8 suppliers, which the file names only by identifier); sum of these 40 kWh; lognormal variance with pedigree 0.064, pedigree (3,4,5,5,3)
  EcoSpold01Location=CH
  Estimation based on specific energy demand of engineering hours
  Uncertainty: estimation based on specific energy demand of engineering hours
- electricity, medium voltage: 12.1172, 3.78097, 0.112597, 0.574517, 8.25493, 34.6907, 2.57156, 1.89753 kWh (8 suppliers, which the file names only by identifier); sum of these 64 kWh; lognormal variance with pedigree 0.1246, pedigree (2,4,5,5,4)
  Approximation with company data of similar branch
  EcoSpold01Location=UCTE
  Uncertainty: approximation with company data of similar branch
- fuel cell, stack polymer electrolyte membrane, 2kW electrical, future: 1 unit; lognormal variance with pedigree 0.37, pedigree (5,5,5,5,1)
  Material input
  EcoSpold01Location=CH
  Uncertainty: material input
- heat, central or small-scale, other than natural gas: 278.179, 3.82081 MJ (2 suppliers, which the file names only by identifier); sum of these 282 MJ; lognormal variance with pedigree 0.064, pedigree (3,4,5,5,3)
  Estimation based on specific energy demand of engineering hours
  EcoSpold01Location=CH
  Uncertainty: estimation based on specific energy demand of engineering hours
  properties: heating value, net 1 MJ
- heat, district or industrial, natural gas: 115.956, 313.985, 5.15957 MJ (3 suppliers, which the file names only by identifier); sum of these 435.1 MJ; lognormal variance with pedigree 0.1246, pedigree (2,4,5,5,4)
  Approximation with company data of similar branch
  EcoSpold01Location=RER
  Uncertainty: approximation with company data of similar branch
  properties: heating value, net 1 MJ
- heating and sanitary equipment, mini CHP plant: 0.65 unit; lognormal variance with pedigree 0.39, pedigree (4,4,5,5,3)
  Approximation based on similar process
  EcoSpold01Location=CH
  Uncertainty: approximation based on similar process
- injection moulding: 5.3 kg; lognormal variance with pedigree 0.0546, pedigree (2,4,5,5,1)
  Based on material input
  EcoSpold01Location=RER
  Uncertainty: based on material input
- inverter, 2.5kW: 0.8 unit; lognormal variance with pedigree 0.38, pedigree (4,4,5,5,3)
  Data from 3kWel unit for use in photovoltaics
  EcoSpold01Location=RER
  Uncertainty: data from 3kWel unit for use in photovoltaics
- platinum: 0.0012 kg; lognormal variance with pedigree 0.074, pedigree (3,4,5,5,3)
  (same comment as for aluminium, wrought alloy)
  properties: dry mass 1 kg, wet mass 1 kg
- polyethylene, high density, granulate: 4.8 kg; lognormal variance with pedigree 0.0726, pedigree (2,4,5,5,3)
  (same comment as for cast iron)
  properties: carbon content, fossil 0.857143, dry mass 1 kg, heating value, net 42.47 MJ, wet mass 1 kg
  note on carbon content, fossil: Polyethylene is formed out of a huge amount of ethylene monomers (C2H4) (ecoinvent v2.2 report 11_II). MW=28 g/mol
- polypropylene, granulate: 0.5 kg; lognormal variance with pedigree 0.0726, pedigree (2,4,5,5,3)
  (same comment as for cast iron)
  properties: carbon content, fossil 0.857143, dry mass 1 kg, heating value, net 32.78 MJ, wet mass 1 kg
  note on carbon content, fossil: Polypropylene is formed by the polymerisation of propylene, C3H6 (ecoinvent v2.2 report 11_II)
  note on heating value, net: Value extracted from "treatment of waste polypropylene, open burning"
- polystyrene foam slab: 0.6 kg; lognormal variance with pedigree 0.0726, pedigree (2,4,5,5,3)
  (same comment as for cast iron)
  properties: carbon content, fossil 0.859091, dry mass 1 kg, heating value, net 38.67 MJ, wet mass 1 kg
  note on carbon content, fossil: XPS consists in 91% of polystyrene, 7% of blowing agent and the re-maining 2% are flame retardants (bromine compounds) and other additives (ecoinvent v2.2 report 7, part XIV, pg69). The chemical formula of polystyrene is (C8H8)n. Here, the blowing agent is CO2.
- sheet rolling, aluminium: 4.6 kg; lognormal variance with pedigree 0.0546, pedigree (2,4,5,5,1)
  EcoSpold01Location=RER
  Based on material input
  Uncertainty: based on material input
- sheet rolling, chromium steel: 46.2 kg; lognormal variance with pedigree 0.0546, pedigree (2,4,5,5,1)
  EcoSpold01Location=RER
  Based on material input
  Uncertainty: based on material input
- sheet rolling, steel: 39.4 kg; lognormal variance with pedigree 0.0546, pedigree (2,4,5,5,1)
  EcoSpold01Location=RER
  Based on material input
  Uncertainty: based on material input
- steel, chromium steel 18/8, hot rolled: 46.2 kg; lognormal variance with pedigree 0.0726, pedigree (2,4,5,5,3)
  (same comment as for cast iron)
  properties: carbon content, fossil 0.0008, dry mass 1 kg, wet mass 1 kg
  note on carbon content, fossil: Stainless steel model is the grade 304 steel (18/8 stainless, 18% chromium 8% nickel; max. 0.08% C)
- steel, low-alloyed, hot rolled: 39.4 kg; lognormal variance with pedigree 0.0726, pedigree (2,4,5,5,3)
  (same comment as for aluminium, wrought alloy)
  properties: carbon content, fossil 0.005, dry mass 1 kg, wet mass 1 kg
  note on carbon content, fossil: Low alloyed steel composition given in Tab. 3.2 ecoinvent v2.2 report 10_partII. Steel assumed to have a C content of 0.5%
- titanium dioxide: 0.14 kg; lognormal variance with pedigree 0.0726, pedigree (2,4,5,5,3)
  (same comment as for cast iron)
  properties: dry mass 1 kg, wet mass 1 kg
- transport, passenger car: 400 km; lognormal variance with pedigree 0.2, pedigree (4,4,5,5,3)
  EcoSpold01Location=CH
  Estimation
  Uncertainty: estimation
- waste polyethylene/polypropylene product: -3.80077, -1.49923 kg (2 suppliers, which the file names only by identifier); sum of these -5.3 kg; lognormal variance with pedigree 0.0328, pedigree (2,4,2,5,3)
  EcoSpold01Location=CH
  Disposal of plastic parts
  Uncertainty: disposal of plastic parts
  production volume
    Calculated from the production volume of fuel cell, polymer electrolyte membrane, 2kWe, future in proportion to the respective output amounts.
  properties: carbon content, fossil 0.748045, dry mass 0.847 kg, heating value, net 42.47 MJ, water content 0.180638, wet mass 1 kg
  note on carbon content, fossil: Mixed various plastics was used to estimate the C content of this waste (Tab A.2, ecoinvent v2.2 report 13_I)
- waste polystyrene isolation, flame-retardant: -0.169725, -0.430275 kg (2 suppliers, which the file names only by identifier); sum of these -0.6 kg; lognormal variance with pedigree 0.0328, pedigree (2,4,2,5,3)
  Disposal of plastic insulating material
  EcoSpold01Location=CH
  Uncertainty: disposal of plastic insulating material
  production volume
    (same comment as for waste polyethylene/polypropylene product)
  properties: carbon content, fossil 0.918145, dry mass 0.998012 kg, heating value, net 38.67 MJ, water content 0.00199232, wet mass 1 kg
  note on carbon content, fossil: Polystyrene isolation (EPS) is flame-retarded with hexa-bromo-cyclo-dodecan (C12H18Br6) and contains 0.67 w% bromine (ecoinvent v2.2 report 13_I, pg 39). The rest is polystyrene: (C8H8)n.
- wastewater, average: -0.000418302, -0.117488, -0.0280938 m3 (3 suppliers, which the file names only by identifier); sum of these -0.146 m3; lognormal variance with pedigree 0.102, pedigree (4,4,1,5,4)
  Approximation for waste water treatment
  EcoSpold01Location=CH
  Uncertainty: approximation for waste water treatment
  production volume
    (same comment as for waste polyethylene/polypropylene product)
  properties: carbon content, non-fossil 0.194039, dry mass 0.346837 kg, mass concentration, TOC 0.1091 kg/m3, mass concentration, calcium 0.039453 kg/m3, mass concentration, chlorine 0.030031 kg/m3, mass concentration, hydrogen 0.013365 kg/m3, mass concentration, nitrogen 0.031015 kg/m3, mass concentration, oxygen 0.069824 kg/m3, mass concentration, sodium 0.06456 kg/m3, mass concentration, sulfur 0.015602 kg/m3, water content 2882.2, wet mass 1000 kg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
  note on carbon content, non-fossil: 0.0673 kg TOC/m3 (Tab A.17, ecoinvent v2.2 report 13_I). TOC was considered as Total Carbon.

## Inputs from nature
- Occupation, industrial area [natural resource, land]: 0.75 m2*year; lognormal variance with pedigree 0.112, pedigree (4,4,5,5,1)
  Rough estimation based on company data
  Uncertainty: rough estimation based on company data
- Transformation, from unspecified [natural resource, land]: 0.015 m2; lognormal variance with pedigree 0.192, pedigree (4,4,5,5,1)
  Rough estimation based on company data
  Uncertainty: rough estimation based on company data
- Transformation, to industrial area [natural resource, land]: 0.015 m2; lognormal variance with pedigree 0.192, pedigree (4,4,5,5,1)
  Rough estimation based on company data
  Uncertainty: rough estimation based on company data
- Water, unspecified natural origin [natural resource, in water]: 0.146 m3; name water_UNO_input; lognormal variance with pedigree 0.1246, pedigree (2,4,5,5,4)
  Approximation with company data of similar branch
  Uncertainty: approximation with company data of similar branch

## Emissions to nature
- Water [air, unspecified]: 0.0219 m3; name water_to_air_unspecified; lognormal variance with pedigree 0.0827, pedigree (2,2,5,5,1)
  Calculated value based on literature values and expert opinion. See comments in the parametres' comment field.
  property fraction, origin: fresh water 0; name fraction_origin_fresh_water
  property fraction, origin: salt water 0; name fraction_origin_salt_water
  property fraction, origin: unspecified 1; name fraction_origin_unspecified

## Sampling procedure
Literature data and manufacturer information

## Extrapolations
none This dataset has been copied from an original dataset covering the geography CH. The uncertainty has been adjusted accordingly.

## Review by Rolf Frischknecht 2007-08-13
passed
none
