# 2-pyridinol production

Dataset: EcoSpold 2, unit process
Geography: RER
Time period: 2010-01-01 to 2022-12-31
Technology level: current
Classification: ISIC rev.4 ecoinvent: 2011:Manufacture of basic chemicals
Synonyms: C5H5NO
Scenario: Business-as-Usual
System model: Allocation at the point of substitution
Share of production covered: 100 %
Generated by: Jürgen Sutter
Database: ecoinvent
isCopyrightProtected: true

## General comment
The process "2-pyridinol, at plant, RER" is modelled for the production of 2-pyridinol from aminopyridine in Europe. Raw materials are modelled with a stoechiometric calculation. Emissions are estimated. Energy consumptions, infrastructure and transports are calculated with standard values.
2-Pyridinol (C4H9NO; CAS 142-08-5, 2-hydroxypyridine) is a colourless solid. Diazotization of aminopyridine is used for the production of pyridinols.
C5H6N2 + NaNO3 + H2SO4 → C5H5NO + NH3 + NaSO4 + NO2
2-Pyridinol is also obtained from pyridine N-oxide by reaction with acid anhydrides and subsequent hydrolysis.
2-Pyridinol is a synthetic intermediate for the tranquilizer amphenidone.
Frischknecht R., Jungbluth N., Althaus H.-J., Doka G., Dones R., Heck T., Hellweg S., Hischier R., Nemecek T., Rebitzer G. and Spielmann M. (2007) Overview and Methodology. Final report ecoinvent v2.0 No. 1. Swiss Centre for Life Cycle Inventories, Dübendorf, CH, retrieved from: www.ecoinvent.org.

Gendorf (2000) Umwelterklärung 2000, Werk Gendorf. Werk Gendorf, Burgkirchen as pdf-File under: http://www.gendorf.de/pdf/umwelterklaerung2000.pdf

Shinkichi Shimizu, Nanao Watanabe, Toshiaki Kataoka, Takayuki Shoji, Nobuyuki Abe, Sinji Morishita, Hisao Ichimura: Pyridine and Pyridine Derivatives. Published online: 2000. In: Ull-mann's Encyclopedia of Industrial Chemistry, Seventh Edition, 2004 Electronic Release (ed. Fiedler E., Grossmann G., Kersebohm D., Weiss G. and Witte C.). 7 th Electronic Release Edition. Wiley InterScience, New York, DOI: 10.1002/14356007.a22_399

## Included activities end
Production of 2-pyridinol including materials, energy uses, infrastructure and emissions.

## Geography
The inventory is modelled for Europe.

## Technology
Diazotization of aminopyridine

## Time period
Time of publications

## Parameters
- fraction, cooling water, cooling pond system, to air: 0.032 dimensionless; name fraction_CW_CP_to_air; lognormal variance with pedigree 0.0413, pedigree (2,3,1,3,1)
  Calculated based on literature value (Scown, C.D., 2011, Water Footprint of U.S. Transportation Fuels and supplying information of the article) (Vionnet, S., Quantis Water Database - Technical Report, 2012).
- fraction, cooling water, once-through system, to air: 0.004 dimensionless; name fraction_CW_OT_to_air; lognormal variance with pedigree 0.0413, pedigree (2,3,1,3,1)
  (same comment as for fraction, cooling water, cooling pond system, to air)
- fraction, cooling water, recirculating system, to air: 0.771 dimensionless; name fraction_CW_R_to_air; lognormal variance with pedigree 0.0413, pedigree (2,3,1,3,1)
  (same comment as for fraction, cooling water, cooling pond system, to air)
- fraction, cooling water, to air: 0.3875 dimensionless; name fraction_CW_to_air; = (0.5*fraction_CW_OT_to_air)+(0.5*fraction_CW_R_to_air); lognormal variance with pedigree 0.092025, pedigree (4,4,3,2,4)
  Calculated value based on literature value (see comments of the other parametres present in this dataset) and expert opinion. In the case when no industry/literature data are available about the type of cooling or directly fraction, cooling water, to air specific for the process a default assumption is applied. It is assumed that the once-through cooling system is used in 50% of all cases and recirculating system is used in another 50% of all cases.

## Reference product
- 2-pyridinol: 1 kg; By-product classification allocatable product; CPC 341: Basic organic chemicals; CAS 142-08-5
  EcoSpold01Location=RER
  production volume 3.3e6 kg
    Expert judgment
  property carbon content, fossil 0.551459
    Calculated based on molecular structure. See tab "chemicals".
  property heating value, net 25.5 MJ
    LHV is calculated based on the elemental composition of the substance. Based on the name of the substance, the chemical formula of the substance is manually found to be: C5H5NO.
  property price 62.017 EUR2005
    Calculated based on inputs: The price of the product has been calculated as a sum of the values of the material and energy inputs for this product. This value is therefore a rough estimation. It may underestimate the real price since there are additional expenses when producing any product. These expences can include for example labour costs, treatment of waste materials and profit for the producer. Please consider carefully whether this level of data quality is acceptable for your application.
  properties: carbon allocation 0.551459 kg, carbon content 0.551459, carbon content, non-fossil 0, dry mass 1 kg, water content 0, water in wet mass 0 kg, wet mass 1 kg

## Inputs from technosphere
- aminopyridine: 1.0416 kg; lognormal variance with pedigree 0.0335, pedigree (4,5,4,1,1)
  As there was no data available for the production of 2-pyridinol, the values for the consumption of the raw materials are calculated with an assumed yield of 95 % (Frischknecht et al. 2007).
  EcoSpold01Location=RER
  Uncertainty: Stoechiometric calculation
  properties: carbon content, fossil 0.679054, dry mass 1 kg, heating value, net 27.06 MJ, wet mass 1 kg
  note on carbon content, fossil: Calculated based on molecular structure. See tab "chemicals".
- chemical factory, organics: 4e-10 unit; lognormal variance with pedigree 0.3184, pedigree (4,5,5,5,5)
  No information was readily available about infrastructure and land-use of 2-pyridinol production plants. Therefore, in this study, the infrastructure is estimated based on the module "chemical plant, organics". This module assumes a built area of about 4.2 ha, an average output of 50'000 t/a, and plant life of fifty years. For this study, the estimated value is 4.00 E-10 units per kg of produced chemical.
  EcoSpold01Location=RER
  Uncertainty: Estimation
- electricity, medium voltage: 0.333 kWh; lognormal variance with pedigree 0.1786, pedigree (4,5,5,5,5)
  There was no information available on the amount of energy used for the production process. In order not to neglect the process energy demand those values were approximated with data from an large chemical plant site in Germany producing 2.05 Mt a-1 (intermediates included) of different chemicals (Gendorf (2000)). The values for the energy consumption per kg of product of this plant (3.2 MJ kg-1) were used as approximation for the energy consumption of the 2-pyridinol production. This total energy demand contains a split of 50% natural gas, 38% electricity and 12% steam from external energy sources. For this inventory all energy used for heat or steam was assumed to be natural gas. For this inventory an amount of 2 MJ natural gas and 0.333 kW electricity per kg product was used.
  EcoSpold01Location=UCTE
  Uncertainty: Estimation
- heat, from steam, in chemical industry: 2 MJ; lognormal variance with pedigree 0.1786, pedigree (4,5,5,5,5)
  There was no information available on the amount of energy used for the production process. In order not to neglect the process energy demand those values were approximated with data from an large chemical plant site in Germany producing 2.05 Mt a-1 (intermediates included) of different chemicals (Gendorf (2000)). The values for the energy consumption per kg of product of this plant (3.2 MJ kg-1) were used as approximation for the energy consumption of the 2-pyridinol production. This total energy demand contains a split of 50% natural gas, 38% electricity and 12% steam from external energy sources. For this inventory all energy used for heat or steam was assumed to be natural gas. For this inventory an amount of 2 MJ natural gas and 0.333 kW electricity per kg product was used.
  EcoSpold01Location=RER
  Uncertainty: Estimation
  properties: heating value, net 1 MJ
- sodium hydroxide, without water, in 50% solution state: 0.022161 kg; lognormal variance with pedigree 0.0335, pedigree (4,5,4,1,1)
  EcoSpold01Location=RER
  The unreacted sulphuric acid is considered to be neutralized with sodium hydroxide.
  Uncertainty: Stoechiometric calculation
  properties: dry mass 1 kg, heating value, net 3.03 MJ, wet mass 1 kg
- sodium nitrate: 0.94183 kg; lognormal variance with pedigree 0.0335, pedigree (4,5,4,1,1)
  (same comment as for aminopyridine)
  properties: dry mass 1 kg, wet mass 1 kg
- sulfuric acid: 1.0859 kg; lognormal variance with pedigree 0.0335, pedigree (4,5,4,1,1)
  EcoSpold01Location=RER
  As there was no data available for the production of 2-pyridinol, the values for the consumption of the raw materials are calculated with an assumed yield of 95 % (Frischknecht et al. 2007).
  Uncertainty: Stoechiometric calculation
  properties: dry mass 1 kg, wet mass 1 kg

## Inputs from nature
- Water, cooling, unspecified natural origin [natural resource, in water]: 0.024 m3; name water_cooling_UNO_input; lognormal variance with pedigree 0.0335, pedigree (4,5,4,1,1)
  There was no information available on the amount of cooling water used within the plant. In order not to neglect the process cooling water demand this value was approximated with data from an large chemical plant site in Germany producing 2.05 Mt a-1 (intermediates included) of different chemicals (Gendorf 2000). In this plant in total an average 24 kg water per kg of product were used for. This value was used in this inventory as approximation for the cooling water consumption of the 2-pyridinol production.
  There was no information available on the amount of cooling water used within the plant. In order not to neglect the process cooling water demand this value was approximated with data from an large chemical plant site in Germany producing 2.05 Mt a-1 (intermediates included) of different chemicals (Gendorf 2000). In this plant in total an average 24 kg water per kg of product were used for. This value was used in this inventory as approximation for the cooling water consumption of the 2-pyridinol production.
  Uncertainty: Estimation

## Emissions to nature
- Ammonia [air, urban air close to ground]: 0.00035789 kg; lognormal variance with pedigree 0.1786, pedigree (4,5,5,5,5)
  There was no data available on process emissions to air for the 2-pyridinol production. As approximation the air emissions occurring from the purge vent, the distillation vent and fugitive emission sources were estimated to 0.2% of the ammonia input.
  Uncertainty: Estimation
- Carbon dioxide, fossil [air, urban air close to ground]: 0.12188 kg; lognormal variance with pedigree 0.1786, pedigree (4,5,5,5,5)
  The remaining amount of unreacted inputs is assumed to leave the production process with the waste water. Further it was assumed that this wastewater is treated in a internal wastewater plant. The removal efficiency for 2-amino pyridine is assumed with 100%. The carbon contained in the removed 2-amino pyridine is accounted as CO2 emissions to air.
  Uncertainty: Estimation
- Nitrogen oxides [air, urban air close to ground]: 0.00096842 kg; lognormal variance with pedigree 0.1786, pedigree (4,5,5,5,5)
  There was no data available on process emissions to air for the 2-pyridinol production. As approximation the air emissions occurring from the purge vent, the distillation vent and fugitive emission sources were estimated to 0.2% of the produced nitrogen oxide. The remaining nitrogen oxide is considered to be oxidized to nitrogen.
  Uncertainty: Estimation
- Water [air, unspecified]: 0.0093 m3; name water_to_air_unspecified; = water_cooling_UNO_input*fraction_CW_to_air; lognormal variance with pedigree 0.130025, pedigree (4,4,5,2,4)
  Calculated value based on literature values and expert opinion. See comments in the parametres' comment field.
  property fraction, origin: fresh water 0; name fraction_origin_fresh_water
  property fraction, origin: salt water 0; name fraction_origin_salt_water
  property fraction, origin: unspecified 1; name fraction_origin_unspecified
- Ammonium [water, surface water]: 0.089295 kg; lognormal variance with pedigree 0.1786, pedigree (4,5,5,5,5)
  The remaining amount of unreacted inputs is assumed to leave the production process with the waste water. Further it was assumed that this wastewater is treated in a internal wastewater plant. For the ammonia within the waste water a removal efficiency of 50% was assumed. The nitrogen emitted to air (N2).
  Uncertainty: Estimation
- Nitrate [water, surface water]: 0.034349 kg; lognormal variance with pedigree 0.1786, pedigree (4,5,5,5,5)
  The unreacted sulphuric acid is considered to be neutralized with sodium hydroxide. The products from this neutralization are calculated as sodium and sulphate emissions. The unreacted sodium nitrate is calculated as sodium and nitrate emissions. The produced sodium sulphate is calculated as sodium and sulphate emissions.
  Uncertainty: Estimation
- Sodium I [water, surface water]: 0.26759 kg; lognormal variance with pedigree 0.6642, pedigree (4,5,5,5,5)
  (same comment as for Nitrate)
- Sulfate [water, surface water]: 1.0637 kg; lognormal variance with pedigree 0.1786, pedigree (4,5,5,5,5)
  (same comment as for Nitrate)
- Water [water, unspecified]: 0.0147 m3; name water_to_water_unspecified; = water_cooling_UNO_input*(1-fraction_CW_to_air); lognormal variance with pedigree 0.130025, pedigree (4,4,5,2,4)
  (same comment as for Water)
  property fraction, origin: fresh water 0; name fraction_origin_fresh_water_Ww
  property fraction, origin: salt water 0; name fraction_origin_salt_water_Ww
  property fraction, origin: unspecified 1; name fraction_origin_unspecified_Ww

## Sampling procedure
Literature data

## Extrapolations
Emissions are modelled with standard methods.

## Review by Roland Hischier 2011-04-12
automatic validation in Excel
none
