# diesel, burned in diesel-electric generating set, 10MW, for oil and gas extraction

Dataset: EcoSpold 2, unit process
Geography: GLO
Time period: 1985-01-01 to 2022-12-31
Technology level: current
Classification: EcoSpold01Categories: oil/fuels
Classification: ISIC rev.4 ecoinvent: 3510:Electric power generation, transmission and distribution
Scenario: Business-as-Usual
System model: Allocation at the point of substitution
Generated by: Christoph Meili
Published in: Meili, C. 2022
Database: ecoinvent
isCopyrightProtected: true

## General comment
Generic module to estimate emissions due to the use of diesel during the exploration and extraction of crude petroleum oil and natural gas. Following the approach of Meili et al. (2021), overall region-specific emission data for CH4, NOx and SO2 are provided in the main activities for the production of crude oil and natural gas (as described in chapters 9.2 and 9.5 in Meili et al., 2021). To avoid double-counting, these emissions are excluded from this inventory.
[This dataset was already contained in the ecoinvent database version 2. It was not individually updated during the transfer to ecoinvent version 3. Life Cycle Impact Assessment results may still have changed, as they are affected by changes in the supply chain, i.e. in other datasets. This dataset was generated following the ecoinvent quality guidelines for version 2. It may have been subject to central changes described in the ecoinvent version 3 change report (http://www.ecoinvent.org/database/ecoinvent-version-3/reports-of-changes/), and the results of the central updates were reviewed extensively. The changes added e.g. consistent water flows and other information throughout the database. The documentation of this dataset can be found in the ecoinvent reports of version 2, which are still available via the ecoinvent website. The change report linked above covers all central changes that were made during the conversion process.]

## Included activities end
Diesel consumption, emissions and infrastructure for the use of diesel in electric generating sets. Transport to site not included.

## Geography
Data for NO and US.

## Technology
On-site generation of electricity in diesel motor generators.

## Time period
Time of publications.

## Reference product
- diesel, burned in diesel-electric generating set, 10MW, for oil and gas extraction: 1 MJ; By-product classification allocatable product; CPC 17100: Electrical energy
  production volume 2.2e11 MJ
    Rough estimation based on the cumulative requirements for this input to the combined production of oil and gas in the database (based on reference year 2019).
  property price 0.0188 EUR2005
    The production volume of this product is small compared to other products supplied by the activities within the same ISIC 3 category. Therefore, an average price of products supplied by the activities in the same ISIC 3 code has been applied.This price is obtained as '_75 Electricity, steam and hot water, EU27' in the 'EU & DK Input Output Database' (available in SimaPro, 0.068 EUR2003 per kWh). The price is assumed to be valid for both RER2005, world 2005. Conversion of energy unit: 1 kWh = 3.6 MJ
  properties: carbon allocation 0 kg, carbon content 0, heating value, net 1 MJ

## Inputs from technosphere
- diesel: 0.0233904 kg; lognormal variance with pedigree 0.0207, pedigree (3,3,4,3,1)
  EcoSpold01Location=RER
  Calculation
  Uncertainty: Calculation
  properties: carbon content, fossil 0.865, dry mass 1 kg, heating value, net 42.8 MJ, wet mass 1 kg
  note on carbon content, fossil: C-content of diesel is 86.5% (ecoinvent v2.2 report 6_IV, Tab 3.14)
- diesel-electric generating set, 10MW: 1.84924e-10 unit; lognormal variance with pedigree 0.3561, pedigree (3,5,4,3,3)
  EcoSpold01Location=RER
  Estimation
  Uncertainty: Estimation
- lubricating oil: 5.53192e-5, 1.16532e-5 kg (2 suppliers, which the file names only by identifier); sum of these 6.69724e-5 kg; lognormal variance with pedigree 0.2303, pedigree (3,5,2,3,5)
  Rough estimation with data for cogen 200kWe
  EcoSpold01Location=RER
  Uncertainty: Rough estimation with data for cogen 200kWe
  properties: carbon content, fossil 0.75, dry mass 1 kg, heating value, net 40.2 MJ, wet mass 1 kg
  note on carbon content, fossil: Lubricating oil is produced from diesel. C-content/dry mass of fats and oils considered 75%, from: ecoinvent v2.2 report, n 15a, pg 40
  note on heating value, net: Literature value, Source: IPCC 2006, 2006 IPCC Guidelines for National Greenhouse Gas Inventories, Prepared by the National Greenhouse Gas Inventories Programme, Eggleston H.S., Buendia L., Miwa K., Ngara T. and Tanabe K. (eds). Published: IGES, Japan
- waste mineral oil: -4.55098e-7, -4.81339e-5, -1.83833e-5 kg (3 suppliers, which the file names only by identifier); sum of these -6.69724e-5 kg; lognormal variance with pedigree 0.2301, pedigree (3,5,1,3,5)
  Rough estimation
  EcoSpold01Location=CH
  Uncertainty: Rough estimation
  production volume
    Calculated from the production volume of diesel, burned in diesel-electric generating set in proportion to the respective output amounts.
  properties: carbon content, fossil 0.864444, dry mass 0.9 kg, heating value, net 34.7 MJ, water content 0.111111, wet mass 1 kg
  note on carbon content, fossil: Tab A.6, ecoinvent v2.2 report 13_I. C content has been calculated after data in the tables, and then referred to 1 kg DM
  note on heating value, net: Value taken from the general comment of the treatment dataset.

## Emissions to nature
- Benzene [air, non-urban air or from high stacks]: 1.99918e-8 kg; lognormal variance with pedigree 0.1202, pedigree (1,1,2,1,1)
  Extrapolation
- Benzo(a)pyrene [air, non-urban air or from high stacks]: 9.99588e-11 kg; lognormal variance with pedigree 0.1202, pedigree (1,1,2,1,1)
  Extrapolation
- Cadmium II [air, non-urban air or from high stacks]: 2.33904e-10 kg; lognormal variance with pedigree 0.6594, pedigree (2,3,2,1,3)
  Literature for automobile emissions
  Uncertainty: Literature for automobile emissions
- Carbon dioxide, fossil [air, non-urban air or from high stacks]: 0.0729699 kg; lognormal variance with pedigree 0.0033, pedigree (2,3,3,3,1)
  Literature
  Uncertainty: Literature
- Carbon monoxide, fossil [air, non-urban air or from high stacks]: 0.00067972 kg; lognormal variance with pedigree 0.6707, pedigree (3,3,4,3,1)
  Literature
  Uncertainty: Literature
- Chromium III [air, non-urban air or from high stacks]: 1.16952e-9 kg; lognormal variance with pedigree 0.6594, pedigree (2,3,2,1,3)
  Literature for automobile emissions
  Uncertainty: Literature for automobile emissions
- Chromium VI [air, non-urban air or from high stacks]: 2.33904e-12 kg; lognormal variance with pedigree 1.3394, pedigree (2,3,2,1,3)
  Literature for automobile emissions, 0.2% share of Cr VI, basic uncertainity estimated = 10
  Uncertainty: Literature for automobile emissions, 0.2% share of Cr VI, basic uncertainity estimated = 10
- Copper ion [air, non-urban air or from high stacks]: 3.96836e-8 kg; lognormal variance with pedigree 0.6594, pedigree (2,3,2,1,3)
  Literature for automobile emissions
  Uncertainty: Literature for automobile emissions
- Dinitrogen monoxide [air, non-urban air or from high stacks]: 5.99753e-6 kg; lognormal variance with pedigree 0.0607, pedigree (3,3,4,3,1)
  Literature
  Uncertainty: Literature
- Mercury II [air, non-urban air or from high stacks]: 4.66807e-10 kg; lognormal variance with pedigree 0.6887, pedigree (3,3,4,3,3)
  Literature on content in diesel
  Uncertainty: Literature on content in diesel
- NMVOC, non-methane volatile organic compounds [air, non-urban air or from high stacks]: 9.23619e-5 kg; lognormal variance with pedigree 0.1202, pedigree (1,1,2,1,1)
  Environmental report
- Nickel II [air, non-urban air or from high stacks]: 1.63932e-9 kg; lognormal variance with pedigree 0.6594, pedigree (2,3,2,1,3)
  Literature for automobile emissions
  Uncertainty: Literature for automobile emissions
- Particulate Matter, < 2.5 um [air, non-urban air or from high stacks]: 0.00016993 kg; lognormal variance with pedigree 0.1407, pedigree (3,3,4,3,1)
  Literature
  Uncertainty: Literature
- Selenium IV [air, non-urban air or from high stacks]: 2.33904e-10 kg; lognormal variance with pedigree 0.6594, pedigree (2,3,2,1,3)
  Literature for automobile emissions
  Uncertainty: Literature for automobile emissions
- Zinc II [air, non-urban air or from high stacks]: 2.33904e-8 kg; lognormal variance with pedigree 0.6594, pedigree (2,3,2,1,3)
  Literature for automobile emissions
  Uncertainty: Literature for automobile emissions

## Sampling procedure
Literature.

## Extrapolations
From single data to global situation.
