# fibre production, kenaf, retting

Dataset: EcoSpold 2, unit process
Geography: RoW
Time period: 2016-03-01 to 2022-12-31
Technology level: current
Classification: ISIC rev.4 ecoinvent: 1311:Preparation and spinning of textile fibres
Scenario: Business-as-Usual
System model: Allocation at the point of substitution
Generated by: Avraam Symeonidis
Database: ecoinvent
isCopyrightProtected: true

## General comment
In practice, kenaf retting is very similar to jute retting. This activity is approximated by the jute retting and involves immersion of the bundles of kenaf into stagnant water in the jute cultivation field, tanks, ponds, ditches etc., or in slowly flowing clear water in canals, rivulets, rivers etc. After several days of immersion, the kenaf fibre gets loosen from the stalk and is extracted from the stalk which becomes the byproduct.
This dataset serves as the transformation process of kenaf plant to fibre.

## Included activities start
The activity starts with the immersion of the plant bundles into the water.

## Included activities end
The activity ends with the extraction of the kenaf fibres from the retted plants. It is done manually by hand. The kenaf Fibre is then gets dried in the sun.

## Reference product
- fibre, kenaf: 1 kg; By-product classification allocatable product; CPC 01922: Jute, kenaf, and other textile bast fibres, raw or retted, except flax, true hemp and ramie
  production volume 1.183e8 kg
    This amount represents the production volume of kenaf fibre for the year 2019/20 in global scale based on FAO. 2022. Jute, kenaf, sisal, abaca, coir and allied fibres Statistical bulletin 2020. Rome Available at: https://www.fao.org/3/cb7927en/cb7927en.pdf
  property heating value, net 12.47 MJ
    LHV is calculated based on the Carbon content of the product. More details can be found on the respective documentation.
  property price 0.227 EUR2005
    Temporary price data. Calculated as 90% of purchasers price based on: 2005 import and export prices (total trades (USD) divided by total weight (kg) in biggest economies of the world: EU27, USA, Brasil, China, India, Japan and Russia) from UN Commodity Trade Statistics Database (http://data.un.org/Explorer.aspxDatabase [Accessed 2011.06.20]). Commodity: Jute and other textile bast fibres, raw or retted
  properties: carbon allocation 0.418944 kg, carbon content 0.46, carbon content, fossil 0, carbon content, non-fossil 0.46, dry mass 0.910747 kg, water content 0.098, water in wet mass 0.0892532 kg, wet mass 1 kg

## Inputs from technosphere
- electricity, low voltage: 2.65668e-5, 0.000229596, 7.21287e-6, 2.40003e-5, 3.23162e-5, 2.22261e-5, 0.000122627, 0.000436047, 0.00135918, 0.000235964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 kWh (46 suppliers, which the file names only by identifier); sum of these 0.0457487 kWh; lognormal variance with pedigree 0.1726, pedigree (5,5,3,5,5)
  sum of electricity used for retting water extraction and water ribbioning
- kenaf plant, harvested: 8.37856 kg; lognormal variance with pedigree 0.1726, pedigree (5,5,3,5,5)
  Dry retted fibre yield is 6.5% of total plant volume (fresh green matter)
  properties: carbon content, non-fossil 0.475, dry mass 0.177647 kg, water content 4.62914, wet mass 1 kg
  note on carbon content, non-fossil: Biogenic carbon content of vegetation on a dry mass basis (47.5% DM) derived from FAOSTAT. Reference: http://www.fao.org/forestry/17111/en
- stalk: -0.942206 kg; lognormal variance with pedigree 0.1706, pedigree (5,5,1,5,5)
  the by-product of the process, is here approximated by stalk.
  production volume
    calculated based on the stalk to fibre ratio from Bangladesh, which is higher than the Indian one.
  properties: carbon content, non-fossil 0.43507, dry mass 0.879121 kg, heating value, net 13.79 MJ, price 0.00702 EUR2005, water content 0.1375, wet mass 1 kg
  note on heating value, net: net (lower) heating (calorific) value. lower calorific value of jute stalk is 3300 kcal/kg (CDM, CER methodology)

## Inputs from nature
- Water, lake [natural resource, in water]: 0.0925867 m3; = 170/1000; lognormal variance with pedigree 0.1726, pedigree (5,5,3,5,5)
  170 kgs of water converted to m3. No wastewater output is considere as the retting process is usually accomplished on jute growing fields or in canals and the wastewater either gets diluted or washed away.

## Emissions to nature
- Water [air, unspecified]: 0.00689172 m3; lognormal variance with pedigree 0.1726, pedigree (5,5,3,5,5)
  balance for the water included in the kenaf plant
- Water [water, surface water]: 0.0925867 m3; = 170/1000; lognormal variance with pedigree 0.1726, pedigree (5,5,3,5,5)
  Balance of water.

## Extrapolations
This dataste is extrapolated from jute retting. Uncertainty was adjusted accordingly.
