# treatment of sewage sludge, 97% water, WWT, WW from pig iron production, landfarming

Dataset: EcoSpold 2, unit process
Geography: CH
Time period: 2000-01-01 to 2022-12-31
Technology level: current
Classification: ISIC rev.4 ecoinvent: 3821:Treatment and disposal of non-hazardous waste
Scenario: Business-as-Usual
System model: Allocation at the point of substitution
Generated by: Nikolia Stoikou
Database: ecoinvent
isCopyrightProtected: true

## General comment
The process represents the treatment of a waste (sewage sludge) that is exclusively produced from another waste treatment. Recommended use of this dataset: to be used within the specific chain of treatments for 'wastewater from pig iron production'. Share of biogenic carbon in the sludge: 0%.

## Included activities start
The activity starts with the waste being available for landfarming. Collection and transportation of the waste to this process is not included.

## Included activities end
The activity ends with the waste being treated and waste-specific emissions from the landfarming process are released to the environment (air, water and soil). The activity is considering local fate of emissions and the initial specific wastewater composition (generating the sewage sludge). Further, it includes provision of fertiliser functions for N, P, K, if present in the sludge.

## Geography
The site has mean annual temperature (MAT) of 9.5 degC, mean annual precipitation (MAP) of 1483.00559816076 mm/year, mean annual actual evaporation (EAT) of 528.63778611689 mm/year. Climate will influence the local fate emissions based on the elemental composition of the sludge as well as water evaporation to air (= consumptive water use).
References: UN data, 2020. Precipitation, Environment Statistics Database, United Nations Statistics Division Available at: http://data.un.org/Data.aspx?q=precipitation&d=ENV&f=variableID%3a6;
World Bank, 2022. Surface area (sq.km), World Bank Group Available at: https://data.worldbank.org/indicator/AG.SRF.TOTL.K2;
MeteoSwiss, 2022. Data on Swiss temperature mean, Federal Department of Home Affairs FDHA. Federal Office of Meteorology and Climatology. Swiss Climate Available at: https://www.MeteoSwiss.admin.ch/home/climate/swiss-climate-in-detail/Swiss-temperature-mean/Data-on-the-Swiss-temperature-mean.html?query=TEMPERATURE+DATA&topic=/content/MeteoSwiss/tags/topics/klima&pageIndex=0&tab=search_tab;
Doka G.,2021. A model for composition-specific life cycle inventories of regionalised wastewater fates, Zurich, Switzerland. http://www.doka.ch/publications.htm

## Technology
Landfarming is the process of spreading a substrate on agricultural soil. Sewage sludge is generated in the wastewater treatment of wastewater from pig iron production. Spreading of liquid sewage sludge (97w% water content) on agricultural fields with mobile vacuum tanker.

## Reference product
- organic nitrogen fertiliser, as N: 1 kg; By-product classification allocatable product; CPC 34659: Fertilizers n.e.c.
  gross fertilizer function provided from sewage sludge spreading on agricultural fields.
  production volume 0.0440512 kg
    Calculated in proportion to wastewater reference product.
  property nitrogen content 1
    Nitrogen content (on a dry matter basis) of organic nitrogen fertiliser, as N is calculated from the molecular formula of the substance (Nitrogen).
  property price 0.473 EUR2005
    Set equal to the price of the corresponding inorganic fertiliser
  properties: carbon allocation 0 kg, carbon content 0, carbon content, fossil 0, carbon content, non-fossil 0, dry mass 1 kg, water content 0, water in wet mass 0 kg, wet mass 1 kg

## Inputs from technosphere
- aluminium oxide factory: 5.84121e-12 unit
- basic oxygen furnace dust: -0.0174491 kg
- basic oxygen furnace dust, for recovery: 0.0019621 kg
- basic oxygen furnace secondary metallurgy slag: -0.000270606 kg
- basic oxygen furnace secondary metallurgy slag, for recovery: 1.09503e-5 kg
- basic oxygen furnace slag: -0.0943683 kg
- basic oxygen furnace slag, for recovery: 0.00276848 kg
- basic oxygen furnace sludge: -0.000270606 kg
- basic oxygen furnace sludge, for recovery: 3.07157e-5 kg
- blast furnace: 2.03414e-12 unit
- blast furnace dust: -0.0017188 kg
- blast furnace dust, for recovery: 0.00136768 kg
- blast furnace slag: -0.0419552 kg
- blast furnace sludge: -0.000552035, -0.000322881 kg (2 suppliers, which the file names only by identifier); sum of these -0.000874917 kg
- blast furnace sludge, for recovery: 0.000488112 kg
- blast oxygen furnace converter: 1.19947e-11 unit
- coke: 1.78198 MJ
- compressed air, 600 kPa gauge: 0.0129745 m3
- compressed air, 800 kPa gauge: 0.000443317 m3
- dolomite: 0.00397829 kg
- electric arc furnace secondary metallurgy slag, for recovery: 0.000468113 kg
- electric arc furnace slag, for recovery: 0.00057094 kg
- electricity, medium voltage: 0.0294783 kWh
- ferromanganese, high-coal, 74.5% Mn: 0.00685089 kg
- ferronickel: 0.00704807 kg
- hard coal: 0.0228846 kg
- inert waste, for final disposal: -0.000711877 kg
- iron ore concentrate: 0.228955 kg
- iron pellet: 0.0610257 kg
- iron scrap, sorted, pressed: 0.203605 kg
- iron sinter: 0.160192 kg
- lime, hydrated, loose weight: 0.00616832 kg
- limestone, unprocessed: 0.032157 kg
- mill scale: -5.9645e-5 kg
- molybdenite: 9.34245e-5 kg
- natural gas, high pressure: 0.00191753, 1.37394e-5 m3 (2 suppliers, which the file names only by identifier); sum of these 0.00193127 m3
- oxygen, liquid: 0.0702191 kg
- pig iron: 0.778353 kg
- quicklime, in pieces, loose: 0.042716 kg
- refractory, fireclay, packed: 0.000305128 kg
- wastewater from pig iron production: -3.02873e-5, -0.00120515 m3 (2 suppliers, which the file names only by identifier); sum of these -0.00123544 m3

## Inputs from nature
- Oxygen [natural resource, in air]: 0.0276245 kg
- Water, cooling, unspecified natural origin [natural resource, in water]: 0.00535731 m3
- Water, unspecified natural origin [natural resource, in water]: 7.53936e-5 m3

## Emissions to nature
- Arsenic ion [air, unspecified]: 7.00946e-10 kg
- Benzo(a)pyrene [air, unspecified]: 4.75978e-10 kg
- Cadmium II [air, unspecified]: 1.73813e-9 kg
- Carbon dioxide, fossil [air, unspecified]: 0.24292 kg
- Carbon monoxide, fossil [air, unspecified]: 0.00592976 kg
- Chromium III [air, unspecified]: 2.95956e-8 kg
- Copper ion [air, unspecified]: 1.32656e-7 kg
- Dioxins, measured as 2,3,7,8-tetrachlorodibenzo-p-dioxin [air, unspecified]: 4.19756e-13 kg
- Heat, waste [air, unspecified]: 0.184149 MJ
- Hydrochloric acid [air, unspecified]: 8.04864e-6 kg
- Hydrogen fluoride [air, unspecified]: 4.23156e-7 kg
- Hydrogen sulfide [air, unspecified]: 1.6393e-6 kg
- Iron ion [air, unspecified]: 3.70195e-5 kg
- Lead II [air, unspecified]: 4.67558e-7 kg
- Manganese II [air, unspecified]: 6.36804e-7 kg
- Mercury II [air, unspecified]: 1.06304e-9 kg
- Methane, fossil [air, unspecified]: 2.82741e-5 kg
- NMVOC, non-methane volatile organic compounds [air, unspecified]: 4.62217e-6 kg
- Nickel II [air, unspecified]: 5.96465e-9 kg
- Nitrogen oxides [air, unspecified]: 0.000161687 kg
- PAH, polycyclic aromatic hydrocarbons [air, unspecified]: 1.1538e-8 kg
- Particulate Matter, < 2.5 um [air, unspecified]: 7.27694e-5 kg
- Particulate Matter, > 10 um [air, unspecified]: 2.2154e-5 kg
- Particulate Matter, > 2.5 um and < 10um [air, unspecified]: 4.82354e-6 kg
- Polychlorinated biphenyls [air, unspecified]: 1.54297e-11 kg
- Selenium IV [air, unspecified]: 1.19753e-8 kg
- Sulfur dioxide [air, unspecified]: 0.000128381 kg
- Titanium ion [air, unspecified]: 1.53747e-9 kg
- Vanadium V [air, unspecified]: 2.27852e-9 kg
- Water [air, unspecified]: 0.00557906 m3
- Water [water, unspecified]: 0.000148026 m3
