# treatment of wastewater from potato starch production, wastewater treatment

Dataset: EcoSpold 2, unit process
Geography: RoW
Time period: 2010-01-01 to 2022-12-31
Technology level: current
Classification: ISIC rev.4 ecoinvent: 3700:Sewerage
Scenario: Business-as-Usual
System model: Allocation at the point of substitution
Generated by: Nikolia Stoikou
Database: ecoinvent
isCopyrightProtected: true

## General comment
This dataset represents the treatment of a wastewater, generated from an ordinary transforming activity. Purification in wastewater treatment of 'wastewater from potato starch production'. Recommended use of this dataset: to be used for wastewaters, generated from ordinary transforming activities, of equal or similar composition. The wastewater has a content of TOC: 0.51291 kg/m3, COD: 1.99965 kg/m3 and BOD: 0.96713 kg/m3. TOC is equal to C present in the wastewater, COD is calculated as TOC/0.2565 and BOD is calculated as COD/0.53034. Detailed elemental composition can be found in the properties of the wastewater treated. Share of biogenic carbon in the sludge: 100%.

## Included activities start
The activity starts with the wastewater being available at the gate of the treatment facility. Collection and transportation of the wastewater to the treatment plant is not included.

## Included activities end
The activity ends with the wastewater being treated and waste-specific emissions released to the environment. Expenditures from treatment of wastewater in waste treatment plant are included as well as relevant infrastructure of the plant. Emissions from any sludge digestion, biogas generation and utilization (heeding specific wastewater composition) are also included. Waste-specific direct emissions of untreated wastewater and required territory-specific infrastructure for sewers are not contained within this dataset but instead in the regional market datasets for this wastewater.

## Geography
The site has mean annual temperature (MAT) of 16.743579766537 degC, mean annual precipitation (MAP) of 1250.84108527132 mm/year, mean annual actual evaporation (EAT) of 460.58904958214 mm/year. In the WWT plant, 0% of its water input are lost due to evaporation from pools, 0.0253% of water is *gained* from organic mass degradation, and 0.0117% is removed off site via sludge disposal. (References: UN data, 2020. Precipitation, Environment Statistics Database, United Nations Statistics Division Available at: http://data.un.org/Data.aspx?q=precipitation&d=ENV&f=variableID%3a6; World Bank, 2022. Surface area (sq.km), World Bank Group Available at: https://data.worldbank.org/indicator/AG.SRF.TOTL.K2; Doka G.,2021. A model for composition-specific life cycle inventories of regionalised wastewater fates, Zurich, Switzerland. http://www.doka.ch/publications.htm)

## Technology
This is an inventory for the disposal of a selected wastewater in Global. The reference unit is 1 m3 wastewater input. This activity represents the treatment of a specific wastewater in a WWT plant (while direct emissions and sewering are heeded in the upstream market dataset for this wastewater). The size of the treatment plant infrastructure is for a supranational region average territory situation. The assumed size of the WWTP treats 82.2 Mio m3 per year. The mixture of WWTP with one, two, or three stages is 8.2%-41.2%-50.6%. The actual, waste-specific oxygen requirement in the biological stages is 0.2211292 kg O. The digestion process produces 49.35646 litres of biogas with an energy content of 1.1391615MJ. 60.5% of the biogas is utilized for energy. The remainder is flared. The gross electric efficiency is 26.564%. The gross thermal efficiency is 47.853%. After digestion, the remaining total sludge mass (dry matter) is 0.3322kg DM.

## Reference product
- iron scrap, sorted, pressed: 1 kg; By-product classification Recyclable; CPC 39310: Slag, dross, scalings and other waste from the manufacture of iron or steel; lognormal variance with pedigree 0.3611, pedigree (1,1,1,1,1)
  scrap output from used infrastructure for wastewater treatment plant.
  Uncertainty: Uncertainty calculated from wastewater technosphere fate uncertainty and treatment infrastructure uncertainty.
  production volume 60726.3 kg
    Calculated in proportion to wastewater reference product.
  property price 0.175 EUR2005
    Temporary price data. Calculated as 90% of purchasers price based on: 2005 import and export prices (total trades (USD) divided by total weight (kg) in biggest economies of the world: EU27, USA, Brasil, China, India, Japan and Russia) from UN Commodity Trade Statistics Database (http://data.un.org/Explorer.aspxDatabase [Accessed 2011.06.20]). Commodity: Waste or scrap, of cast iron
  properties: carbon allocation 0 kg, carbon content 0, carbon content, fossil 0, carbon content, non-fossil 0, dry mass 1 kg, water content 0, water in wet mass 0 kg, wet mass 1 kg

## Inputs from technosphere
- EDTA, ethylenediaminetetraacetic acid: 1.37078e-5 kg
- ammonia, anhydrous, liquid: 6.94458e-10, 7.27867e-11, 1.53692e-9, 5.88956e-11, 2.67504e-9, 3.57746e-10, 3.25383e-10, 7.69762e-9, 2.29952e-10 kg (9 suppliers, which the file names only by identifier); sum of these 1.36488e-8 kg
- biowaste: -6.02838e-5, -5.30938e-7 kg (2 suppliers, which the file names only by identifier); sum of these -6.08147e-5 kg
- chemical factory, organics: 2.40013e-11 unit
- chemical, inorganic: 0.00142766 kg
- chemical, organic: 0.00193612 kg
- cow milk: 0.000364754, 0.201301 kg (2 suppliers, which the file names only by identifier); sum of these 0.201666 kg
- cream, from cow milk: 0.0112317 kg
- dairy: 1.84901e-6 m3
- electricity, medium voltage: 0.0103668, 0.00115058, 0.00326254, 8.39486e-5, 0.00255887, 3.42642e-5, 0.00017483, 0.000273045, 0.0105567, 0.000782547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 kWh (11 suppliers, which the file names only by identifier); sum of these 0.0298215 kWh
- evaporation of milk: 3.47641e-5, 0.00802167 kg (2 suppliers, which the file names only by identifier); sum of these 0.00805644 kg
- heat, district or industrial, natural gas: 0.0192094, 0.0542703, 0.0519716, 0.000308482 MJ (4 suppliers, which the file names only by identifier); sum of these 0.12576 MJ
- heat, district or industrial, other than natural gas: 0.000590847 MJ
- hydrogen peroxide, without water, in 50% solution state: 1.01696e-5, 2.13108e-6 kg (2 suppliers, which the file names only by identifier); sum of these 1.23007e-5 kg
- maize starch: 0.00181361 kg
- municipal solid waste: -1.17324e-6, -2.07468e-5, -1.27163e-7, -0.000249758, -8.89835e-8 kg (5 suppliers, which the file names only by identifier); sum of these -0.000271894 kg
- nitric acid, without water, in 50% solution state: 6.12772e-6, 7.9717e-5, 9.10484e-6, 2.26421e-5, 2.94453e-5, 1.08489e-5, 3.73132e-5, 9.83697e-6, 9.07114e-6, 6.42454e-5 kg (10 suppliers, which the file names only by identifier); sum of these 0.000278353 kg
- potassium hydroxide: 1.1959e-5 kg
- propylene glycol, liquid: 3.21552e-7, 1.5778e-7 kg (2 suppliers, which the file names only by identifier); sum of these 4.79332e-7 kg
- refrigerant R134a: 5.36112e-10 kg
- skimmed milk, from cow milk: 0.00168724 kg
- soda ash, light: 2.32138e-7 kg
- sodium hydroxide, without water, in 50% solution state: 0.000344004 kg
- sodium hypochlorite, without water, in 15% solution state: 6.15796e-9, 2.9386e-8 kg (2 suppliers, which the file names only by identifier); sum of these 3.5544e-8 kg
- spray-drying of milk: 2.42292e-6, 0.000559077 kg (2 suppliers, which the file names only by identifier); sum of these 0.0005615 kg
- strawberry: 0.00357506 kg
- sugar, from sugar beet: 0.00386241 kg
- sugar, from sugarcane: 0.0021718 kg
- tap water: 5.966e-6, 0.152798, 6.45465e-5, 2.55974e-6, 0.00055156, 4.77635e-6, 0.000738639, 1.67916e-6, 1.28671e-5 kg (9 suppliers, which the file names only by identifier); sum of these 0.154181 kg
- transport, freight, lorry, unspecified: 3.64754e-5 metric ton*km
- wastewater from potato starch production: -2.71579e-6, -0.000563312 m3 (2 suppliers, which the file names only by identifier); sum of these -0.000566028 m3
- water, deionised: 7.37876e-8, 2.04979e-5, 6.69204e-5 kg (3 suppliers, which the file names only by identifier); sum of these 8.74921e-5 kg
- wheat grain: 0.000167386, 8.86846e-7 kg (2 suppliers, which the file names only by identifier); sum of these 0.000168273 kg
- whey: 0.000724853 kg

## Inputs from nature
- Water, unspecified natural origin [natural resource, in water]: 0.000398836 m3
- Water, well, in ground [natural resource, in water]: 3.2725e-5 m3

## Emissions to nature
- Ammonia [air, unspecified]: 1.36488e-8 kg
- Methane, chlorodifluoro-, HCFC-22 [air, unspecified]: 5.36112e-10 kg
- Water [air, unspecified]: 2.78285e-5 m3
