# harvesting, by complete harvester, beets

Dataset: EcoSpold 2, unit process
Geography: CH
Time period: 1991-01-01 to 2022-12-31
Technology level: current
Classification: EcoSpold01Categories: agricultural means of production/work processes
Classification: ISIC rev.4 ecoinvent: 0161:Support activities for crop production
Tags: ConvertedDataset
Scenario: Business-as-Usual
System model: Allocation at the point of substitution
Generated by: Silvio Blaser
Published in: Nemecek, T. 2007
Database: ecoinvent
isCopyrightProtected: true

## General comment
This dataset represents an example of a beet harvesting. A complete harvester, big, with bunker, 1-row, without leaf salvage. 'Medium' module for sugar beets (6.8 Tractor hour/ha) and fodder beets (7.7 Tractor hour/ha). For sugar beets 1-row complete harvester is rare, more frequent is the 6-row self driver. Beet production is not included. The functional unit (FU) is one ha harvested. The operation time is 8 h/FU.
[This dataset was already contained in the ecoinvent database version 2. It was not individually updated during the transfer to ecoinvent version 3. Life Cycle Impact Assessment results may still have changed, as they are affected by changes in the supply chain, i.e. in other datasets. This dataset was generated following the ecoinvent quality guidelines for version 2. It may have been subject to central changes described in the ecoinvent version 3 change report (http://www.ecoinvent.org/database/ecoinvent-version-3/reports-of-changes/), and the results of the central updates were reviewed extensively. The changes added e.g. consistent water flows and other information throughout the database. The documentation of this dataset can be found in the ecoinvent reports of version 2, which are still available via the ecoinvent website. The change report linked above covers all central changes that were made during the conversion process.]

## Included activities start
From agricultural field foreseen to be processed.

## Included activities end
This activity ends with harvesting beets. The dataset includes the diesel fuel consumption and the amount of agricultural machinery and of the shed, which has to be attributed to the harvesting. Also taken into consideration is the amount of emissions to the air from combustion and the emission to the soil from tyre abrasion during the work process. The following activities where considered part of the work process: preliminary work at the farm, like attaching the adequate machine to the tractor; transfer to field (with an assumed distance of 1 km); field work (for a parcel of land of 1 ha surface); transfer to farm and concluding work, like uncoupling the machine. The overlapping during the field work is considered. The dataset doesn't include the amount of harvested beets and dust other than from combustion and noise.

## Geography
The inventory applies for Swiss Agricultural Field Work processes.

## Technology
The inventories are based on measurements made by the Swiss Federal Research Station for Agricultural Economics and Engineering of Taenikon (FAT). Fuel consumption and emissions were taken from recent literature of ART, expert's estimations or unpublished data.

## Time period
Measurements were made in the last few years (1999-2001).

## Reference product
- harvesting, by complete harvester, beets: 1 ha; By-product classification allocatable product; CPC 86119: Other support services to crop production
  production volume 19378 ha
    FAOSTAT data year 2011: area of sugar beets
  property price 79.6823 EUR2005
    Calculated based on inputs: The price of the product has been calculated as a sum of the values of the material and energy inputs for this product. This value is therefore a rough estimation. It may underestimate the real price since there are additional expenses when producing any product. These expences can include for example labour costs, treatment of waste materials and profit for the producer. Please consider carefully whether this level of data quality is acceptable for your application.
  properties: carbon allocation 0 kg, carbon content 0

## Inputs from technosphere
- agricultural machinery, unspecified: 7.39 kg; lognormal variance with pedigree 0.042, pedigree (1,4,5,1,1)
  Proxy, based on 'Agricultural Field Work Processes' - pdf-document on the dedicated talk page of ecoinvent (www.ecoinvent.org/talk-pages)
- diesel: 103 kg; lognormal variance with pedigree 0.042, pedigree (1,4,5,1,1)
  (same comment as for agricultural machinery, unspecified)
  properties: carbon content, fossil 0.865, dry mass 1 kg, heating value, net 42.8 MJ, wet mass 1 kg
  note on carbon content, fossil: C-content of diesel is 86.5% (ecoinvent v2.2 report 6_IV, Tab 3.14)
- shed: 0.0198 m2; lognormal variance with pedigree 0.342, pedigree (1,4,5,1,1)
  Proxy, based on 'Agricultural Field Work Processes' - pdf-document on the dedicated talk page of ecoinvent (www.ecoinvent.org/talk-pages)
  This exchange has an activity link directly to the producing activity because the product is primarily consumed in the same geographical area where it is produced.
- tractor, 4-wheel, agricultural: 5.89 kg; lognormal variance with pedigree 0.042, pedigree (1,4,5,1,1)
  (same comment as for agricultural machinery, unspecified)

## Emissions to nature
- Ammonia [air, non-urban air or from high stacks]: 0.00207 kg; lognormal variance with pedigree 0.0981, pedigree (1,2,5,1,3)
  (same comment as for agricultural machinery, unspecified)
- Benzene [air, non-urban air or from high stacks]: 0.000755 kg; lognormal variance with pedigree 0.0981, pedigree (1,2,5,1,3)
  (same comment as for agricultural machinery, unspecified)
- Benzo(a)pyrene [air, non-urban air or from high stacks]: 3.1e-6 kg; lognormal variance with pedigree 0.6981, pedigree (1,2,5,1,3)
  (same comment as for agricultural machinery, unspecified)
- Cadmium II [air, non-urban air or from high stacks]: 1.03e-6 kg; lognormal variance with pedigree 0.6981, pedigree (1,2,5,1,3)
  (same comment as for agricultural machinery, unspecified)
- Carbon dioxide, fossil [air, non-urban air or from high stacks]: 322 kg; lognormal variance with pedigree 0.0581, pedigree (1,2,5,1,3)
  (same comment as for agricultural machinery, unspecified)
- Carbon monoxide, fossil [air, non-urban air or from high stacks]: 0.864 kg; lognormal variance with pedigree 0.692, pedigree (1,4,5,1,1)
  (same comment as for agricultural machinery, unspecified)
- Chromium III [air, non-urban air or from high stacks]: 5.17e-6 kg; lognormal variance with pedigree 0.6981, pedigree (1,2,5,1,3)
  (same comment as for agricultural machinery, unspecified)
- Copper ion [air, non-urban air or from high stacks]: 0.000176 kg; lognormal variance with pedigree 0.6981, pedigree (1,2,5,1,3)
  (same comment as for agricultural machinery, unspecified)
- Dinitrogen monoxide [air, non-urban air or from high stacks]: 0.0124 kg; lognormal variance with pedigree 0.0981, pedigree (1,2,5,1,3)
  (same comment as for agricultural machinery, unspecified)
- Methane, fossil [air, non-urban air or from high stacks]: 0.0133 kg; lognormal variance with pedigree 0.0981, pedigree (1,2,5,1,3)
  (same comment as for agricultural machinery, unspecified)
- NMVOC, non-methane volatile organic compounds [air, non-urban air or from high stacks]: 0.202 kg; lognormal variance with pedigree 0.082, pedigree (1,4,5,1,1)
  (same comment as for agricultural machinery, unspecified)
- Nickel II [air, non-urban air or from high stacks]: 7.24e-6 kg; lognormal variance with pedigree 0.6981, pedigree (1,2,5,1,3)
  (same comment as for agricultural machinery, unspecified)
- Nitrogen oxides [air, non-urban air or from high stacks]: 4.06 kg; lognormal variance with pedigree 0.082, pedigree (1,4,5,1,1)
  (same comment as for agricultural machinery, unspecified)
- PAH, polycyclic aromatic hydrocarbons [air, non-urban air or from high stacks]: 0.00034 kg; lognormal variance with pedigree 0.3581, pedigree (1,2,5,1,3)
  (same comment as for agricultural machinery, unspecified)
- Particulate Matter, < 2.5 um [air, non-urban air or from high stacks]: 0.552 kg; lognormal variance with pedigree 0.3581, pedigree (1,2,5,1,3)
  (same comment as for agricultural machinery, unspecified)
- Selenium IV [air, non-urban air or from high stacks]: 1.03e-6 kg; lognormal variance with pedigree 0.0981, pedigree (1,2,5,1,3)
  (same comment as for agricultural machinery, unspecified)
- Sulfur dioxide [air, non-urban air or from high stacks]: 0.104 kg; lognormal variance with pedigree 0.0581, pedigree (1,2,5,1,3)
  (same comment as for agricultural machinery, unspecified)
- Zinc II [air, non-urban air or from high stacks]: 0.000103 kg; lognormal variance with pedigree 0.6981, pedigree (1,2,5,1,3)
  (same comment as for agricultural machinery, unspecified)
- Cadmium II [soil, agricultural]: 3.12e-6 kg; lognormal variance with pedigree 0.082, pedigree (1,4,5,1,1)
  (same comment as for agricultural machinery, unspecified)
- Lead II [soil, agricultural]: 1.38e-5 kg; lognormal variance with pedigree 0.082, pedigree (1,4,5,1,1)
  (same comment as for agricultural machinery, unspecified)
- Zinc II [soil, agricultural]: 0.00821 kg; lognormal variance with pedigree 0.082, pedigree (1,4,5,1,1)
  (same comment as for agricultural machinery, unspecified)

## Sampling procedure
Data on fuel consumption and emissions of CO, HC and NOx are expert estimations based on measurements for comparable activities (rotary tedder). The other emissions were calculated basing on literature data and the measured fuel consumption.

## Extrapolations
Processes are typical procedures for Switzerland around the year 2000, they are not statistical average processes.

## Review by Roland Hischier 2003-08-06
Passed.

## Review by Roland Hischier 2011-09-28
Transfer of documentation done.
