# blast furnace dust to market for blast furnace dust, for recovery

Dataset: EcoSpold 2, unit process
Geography: RoW
Time period: 2020-01-01 to 2025-12-31
Technology level: current
Classification: ISIC rev.4 ecoinvent: 3821:Treatment and disposal of non-hazardous waste
Scenario: Business-as-Usual
System model: Allocation at the point of substitution
Generated by: Avraam Symeonidis
Database: ecoinvent
isCopyrightProtected: true

## General comment
This is a renaming activity. Its purpose is to link 'blast furnace dust' to the 'market for blast furnace dust, for recovery'. This represents the share of blast furnace dust that is recovered for use via internal (in iron and steelmaking) or external routes (e.g. cement making).Through this renaming, the by-product classification of the blast furnace dust is changed from 'waste' to 'recyclable material'.

## Included activities start
Activity starts with the reception of 'blast furnace dust'.

## Included activities end
Activity ends with the 'blast furnace dust, for recovery' being ready for transportation.

## Reference product
- blast furnace dust, for recovery: 1 kg; name BP; By-product classification Recyclable; CPC 39310: Slag, dross, scalings and other waste from the manufacture of iron or steel
  production volume 7.23086e8 kg
    Calculated based on the production volume of the reference product.
  property aluminium content 0.0152152
    The value of 'aluminium content' is documented in Turner & Symeonidis, 2020. Reference: Turner David & Symeonidis Avraam, 2020, Life cycle inventories of the treatment of iron and steelmaking by-products, ecoinvent association, Zürich, Switzerland
  property calcium content 0.0295295
    The value of 'calcium content' is documented in Turner & Symeonidis, 2020. Reference: Turner David & Symeonidis Avraam, 2020, Life cycle inventories of the treatment of iron and steelmaking by-products, ecoinvent association, Zürich, Switzerland
  property carbon content, fossil 0.351351
    The value of 'carbon content, fossil' is documented in Turner & Symeonidis, 2020. Reference: Turner David & Symeonidis Avraam, 2020, Life cycle inventories of the treatment of iron and steelmaking by-products, ecoinvent association, Zürich, Switzerland
  property carbon content, non-fossil 0
    The value of 'carbon content, non-fossil' is documented in Turner & Symeonidis, 2020. Reference: Turner David & Symeonidis Avraam, 2020, Life cycle inventories of the treatment of iron and steelmaking by-products, ecoinvent association, Zürich, Switzerland
  property copper content 0.0012012
    The value of 'copper content' is documented in Turner & Symeonidis, 2020. Reference: Turner David & Symeonidis Avraam, 2020, Life cycle inventories of the treatment of iron and steelmaking by-products, ecoinvent association, Zürich, Switzerland
  property heating value, net 10.1 MJ
    LHV is calculated based on the Carbon content of the product. More details can be found on the respective documentation.
  property iron content 0.322322
    The value of 'iron content' is documented in Turner & Symeonidis, 2020. Reference: Turner David & Symeonidis Avraam, 2020, Life cycle inventories of the treatment of iron and steelmaking by-products, ecoinvent association, Zürich, Switzerland
  property lead content 0.00118118
    The value of 'lead content' is documented in Turner & Symeonidis, 2020. Reference: Turner David & Symeonidis Avraam, 2020, Life cycle inventories of the treatment of iron and steelmaking by-products, ecoinvent association, Zürich, Switzerland
  property magnesium content 0.0116116
    The value of 'magnesium content' is documented in Turner & Symeonidis, 2020. Reference: Turner David & Symeonidis Avraam, 2020, Life cycle inventories of the treatment of iron and steelmaking by-products, ecoinvent association, Zürich, Switzerland
  property manganese content 0.00357357
    The value of 'manganese content' is documented in Turner & Symeonidis, 2020. Reference: Turner David & Symeonidis Avraam, 2020, Life cycle inventories of the treatment of iron and steelmaking by-products, ecoinvent association, Zürich, Switzerland
  property oxygen content 0.19461
    The value of 'oxygen content' is documented in Turner & Symeonidis, 2020. Reference: Turner David & Symeonidis Avraam, 2020, Life cycle inventories of the treatment of iron and steelmaking by-products, ecoinvent association, Zürich, Switzerland
  property phosphorus content 0.000655656
    The value of 'phosphorus content' is documented in Turner & Symeonidis, 2020. Reference: Turner David & Symeonidis Avraam, 2020, Life cycle inventories of the treatment of iron and steelmaking by-products, ecoinvent association, Zürich, Switzerland
  property potassium content 0.0269269
    The value of 'potassium content' is documented in Turner & Symeonidis, 2020. Reference: Turner David & Symeonidis Avraam, 2020, Life cycle inventories of the treatment of iron and steelmaking by-products, ecoinvent association, Zürich, Switzerland
  property price 0.0121 EUR2005
    Value is calculated based on the iron content of this material in combination with the price for iron ore concentrate on a per kg iron basis.
  property silicon content 0.03003
    The value of 'silicon content' is documented in Turner & Symeonidis, 2020. Reference: Turner David & Symeonidis Avraam, 2020, Life cycle inventories of the treatment of iron and steelmaking by-products, ecoinvent association, Zürich, Switzerland
  property sodium content 0.00249249
    The value of 'sodium content' is documented in Turner & Symeonidis, 2020. Reference: Turner David & Symeonidis Avraam, 2020, Life cycle inventories of the treatment of iron and steelmaking by-products, ecoinvent association, Zürich, Switzerland
  property sulfur content 0.00575576
    The value of 'sulfur content' is documented in Turner & Symeonidis, 2020. Reference: Turner David & Symeonidis Avraam, 2020, Life cycle inventories of the treatment of iron and steelmaking by-products, ecoinvent association, Zürich, Switzerland
  property titanium content 0.0012012
    The value of 'titanium content' is documented in Turner & Symeonidis, 2020. Reference: Turner David & Symeonidis Avraam, 2020, Life cycle inventories of the treatment of iron and steelmaking by-products, ecoinvent association, Zürich, Switzerland
  property vanadium content 0.001001
    The value of 'vanadium content' is documented in Turner & Symeonidis, 2020. Reference: Turner David & Symeonidis Avraam, 2020, Life cycle inventories of the treatment of iron and steelmaking by-products, ecoinvent association, Zürich, Switzerland
  property zinc content 0.00134134
    The value of 'zinc content' is documented in Turner & Symeonidis, 2020. Reference: Turner David & Symeonidis Avraam, 2020, Life cycle inventories of the treatment of iron and steelmaking by-products, ecoinvent association, Zürich, Switzerland
  properties: carbon allocation 0.351 kg, carbon content 0.351351, dry mass 0.999 kg, water content 0.001001, water in wet mass 0.001 kg, wet mass 1 kg

## Inputs from technosphere
- aluminium oxide factory: 3.92553e-13 unit
- basic oxygen furnace dust, for recovery: 0.000134699 kg
- basic oxygen furnace secondary metallurgy slag, for recovery: 7.51738e-7 kg
- basic oxygen furnace slag, for recovery: 0.000188807 kg
- basic oxygen furnace sludge, for recovery: 2.10864e-6 kg
- blast furnace: 6.02572e-13 unit
- blast furnace dust: -0.000466927 kg
- blast furnace dust, for recovery: 9.19134e-5 kg
- blast furnace slag: -0.0124284 kg
- blast furnace sludge: -0.000181196 kg
- blast furnace sludge, for recovery: 6.64948e-5 kg
- coke: 0.459512 MJ
- compressed air, 800 kPa gauge: 2.97926e-5 m3
- electric arc furnace secondary metallurgy slag, for recovery: 1.88872e-5 kg
- electric arc furnace slag, for recovery: 2.35466e-5 kg
- electricity, medium voltage: 1.01601e-6, 1.37188e-6, 1.97302e-6, 4.11853e-7, 2.41236e-5, 0.000130178, 1.30287e-6, 4.87882e-7, 6.15666e-6, 4.06197e-5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 kWh (44 suppliers, which the file names only by identifier); sum of these 0.000533871 kWh
- hard coal: 0.00111031, 0.000503452, 0.00356305, 0.000513761, 0.000750588, 0.000218482, 0.000119466 kg (7 suppliers, which the file names only by identifier); sum of these 0.00677911 kg
- inert waste, for final disposal: -6.01268e-5 kg
- iron ore concentrate: 0.0205783 kg
- iron pellet: 0.0180776 kg
- iron sinter: 0.0474538 kg
- lime, hydrated, loose weight: 0.000414535 kg
- limestone, unprocessed: 0.00251049 kg
- natural gas, high pressure: 1.35643e-6, 5.72554e-7, 3.27917e-6, 9.73134e-7, 5.50509e-5, 5.62664e-6, 6.14194e-7, 1.8124e-8, 2.18091e-6, 2.29022e-6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 m3 (24 suppliers, which the file names only by identifier); sum of these 0.000164618 m3
- quicklime, in pieces, loose: 0.000160161 kg
- refractory, fireclay, packed: 9.03881e-5 kg
- wastewater from pig iron production: -6.16372e-6 m3

## Inputs from nature
- Oxygen [natural resource, in air]: 0.00185648 kg
- Water, cooling, unspecified natural origin [natural resource, in water]: 4.7769e-5 m3
- Water, unspecified natural origin [natural resource, in water]: 1.9168e-5 m3

## Emissions to nature
- Arsenic ion [air, unspecified]: 4.71063e-11 kg
- Benzo(a)pyrene [air, unspecified]: 3.19876e-11 kg
- Cadmium II [air, unspecified]: 1.16809e-10 kg
- Carbon dioxide, fossil [air, unspecified]: 0.0422017 kg
- Carbon monoxide, fossil [air, unspecified]: 0.000343639 kg
- Chromium III [air, unspecified]: 3.33225e-10 kg
- Copper ion [air, unspecified]: 5.30385e-10 kg
- Dioxins, measured as 2,3,7,8-tetrachlorodibenzo-p-dioxin [air, unspecified]: 2.44585e-14 kg
- Hydrochloric acid [air, unspecified]: 5.409e-7 kg
- Hydrogen fluoride [air, unspecified]: 2.84377e-8 kg
- Hydrogen sulfide [air, unspecified]: 4.8561e-7 kg
- Lead II [air, unspecified]: 9.16089e-9 kg
- Manganese II [air, unspecified]: 4.03795e-9 kg
- Mercury II [air, unspecified]: 7.14402e-11 kg
- Methane, fossil [air, unspecified]: 1.90013e-6 kg
- NMVOC, non-methane volatile organic compounds [air, unspecified]: 3.10628e-7 kg
- Nickel II [air, unspecified]: 9.58404e-10 kg
- Nitrogen oxides [air, unspecified]: 1.23699e-5 kg
- PAH, polycyclic aromatic hydrocarbons [air, unspecified]: 1.70814e-10 kg
- Particulate Matter, < 2.5 um [air, unspecified]: 3.18888e-6 kg
- Particulate Matter, > 10 um [air, unspecified]: 1.54459e-6 kg
- Particulate Matter, > 2.5 um and < 10um [air, unspecified]: 3.79917e-7 kg
- Polychlorinated biphenyls [air, unspecified]: 1.03693e-12 kg
- Selenium IV [air, unspecified]: 8.04784e-10 kg
- Sulfur dioxide [air, unspecified]: 1.32742e-5 kg
- Titanium ion [air, unspecified]: 1.03324e-10 kg
- Vanadium V [air, unspecified]: 1.53126e-10 kg
- Water [air, unspecified]: 2.21583e-5 m3
- Water [water, unspecified]: 4.38498e-5 m3
