# mowing, by motor mower

Dataset: EcoSpold 2, unit process
Geography: CH
Time period: 1991-01-01 to 2022-12-31
Technology level: current
Classification: EcoSpold01Categories: agricultural means of production/work processes
Classification: ISIC rev.4 ecoinvent: 0161:Support activities for crop production
Tags: ConvertedDataset
Scenario: Business-as-Usual
System model: Allocation at the point of substitution
Generated by: Dunja Dux
Published in: Nemecek, T. 2007
Database: ecoinvent
isCopyrightProtected: true

## General comment
This dataset represents an example of a typical mowing process. A motor mower, working width 1,9 m. Petrol engine 8 kW. The functional unit (FU) is one ha mowed area. The operation time is 2 h/FU.
[This dataset was already contained in the ecoinvent database version 2. It was not individually updated during the transfer to ecoinvent version 3. Life Cycle Impact Assessment results may still have changed, as they are affected by changes in the supply chain, i.e. in other datasets. This dataset was generated following the ecoinvent quality guidelines for version 2. It may have been subject to central changes described in the ecoinvent version 3 change report (http://www.ecoinvent.org/database/ecoinvent-version-3/reports-of-changes/), and the results of the central updates were reviewed extensively. The changes added e.g. consistent water flows and other information throughout the database. The documentation of this dataset can be found in the ecoinvent reports of version 2, which are still available via the ecoinvent website. The change report linked above covers all central changes that were made during the conversion process.]

## Included activities start
From agricultural field foreseen to be processed.

## Included activities end
This activity ends with mowing by a motor mower. The dataset includes the diesel fuel consumption and the amount of agricultural machinery and of the shed attributed to mowing. It was also taken into consideration the amount of emissions to the air from combustion and the emission to the soil from tyre abrasion during the work process. The following activities where considered part of the work process: preliminary work at the farm, such as attaching the adequate machine to the tractor; driving to field (with an assumed distance of 1 km); field work (for a parcel of land of 1 ha surface); driving to farm and concluding work, like uncoupling the machine. The overlapping during the field work is considered. The dataset doesn't include dust other than from combustion and noise.

## Geography
The inventory applies for Swiss Agricultural Field Work processes.

## Technology
The inventories are based on measurements made by the Swiss Federal Research Station for Agricultural Economics and Engineering of Taenikon (FAT). Fuel consumption and emissions were taken from recent literature of ART, expert's estimations or unpublished data.

## Time period
Measurements were made in the last few years (1999-2001).

## Reference product
- mowing, by motor mower: 1 ha; By-product classification allocatable product; CPC 86119: Other support services to crop production
  For the motor mower, a model weighing 370 kg with a cutter bar of 1.9 m and an 8-kW petrol engine was chosen. The material composition can be assumed to be almost the same as for a tractor, and is described by the ecoinvent-module 'tractor, production'.
  production volume 657000 ha
    FAOSTAT data year 2011: Permanent meadows and pastures area, 3 cuts per year assumed (considering mountain areas and grazing), 20% of it done by motor mower assumed
  property price 7.3921 EUR2005
    Calculated based on inputs: The price of the product has been calculated as a sum of the values of the material and energy inputs for this product. This value is therefore a rough estimation. It may underestimate the real price since there are additional expenses when producing any product. These expences can include for example labour costs, treatment of waste materials and profit for the producer. Please consider carefully whether this level of data quality is acceptable for your application.
  properties: carbon allocation 0 kg, carbon content 0

## Inputs from technosphere
- petrol, two-stroke blend: 3 kg; source Stadler E. 1999; lognormal variance with pedigree 0.042, pedigree (1,4,5,1,1)
  Literature Value. For the motor mower, data were taken from Stadler et al. (1999);activityLink introduced to establish a direct link to the corresponding regional supply of this product
  properties: carbon content, fossil 0.865, dry mass 1 kg, heating value, net 43.2 MJ, wet mass 1 kg
  note on heating value, net: Assumed equal to "petroleum". LHV for petroleum: Based on literature, page 7, Report6, part 4
- shed: 0.00446 m2; lognormal variance with pedigree 0.342, pedigree (1,4,5,1,1)
  Proxy, based on 'Agricultural Field Work Processes' - pdf-document on the dedicated talk page of ecoinvent (www.ecoinvent.org/talk-pages)
  This exchange has an activity link directly to the producing activity because the product is primarily consumed in the same geographical area where it is produced.
- tractor, 4-wheel, agricultural: 0.881 kg; lognormal variance with pedigree 0.042, pedigree (1,4,5,1,1)
  Proxy, based on 'Agricultural Field Work Processes' - pdf-document on the dedicated talk page of ecoinvent (www.ecoinvent.org/talk-pages)

## Emissions to nature
All rows: source Stadler E. 1999
- Ammonia [air, non-urban air or from high stacks]: 0.00012 kg; lognormal variance with pedigree 0.0981, pedigree (1,2,5,1,3)
  Literature Value. Emission data for the motor mower were taken from Stadler et al. (1999).
- Benzene [air, non-urban air or from high stacks]: 0.0284 kg; lognormal variance with pedigree 0.0981, pedigree (1,2,5,1,3)
  Literature Value. Emission data for the motor mower were taken from Stadler et al. (1999).
- Benzo(a)pyrene [air, non-urban air or from high stacks]: 1.2e-7 kg; lognormal variance with pedigree 0.6981, pedigree (1,2,5,1,3)
  Literature Value. Emission data for the motor mower were taken from Stadler et al. (1999).
- Cadmium II [air, non-urban air or from high stacks]: 3e-8 kg; lognormal variance with pedigree 0.6981, pedigree (1,2,5,1,3)
  Literature Value. Emission data for the motor mower were taken from Stadler et al. (1999).
- Carbon dioxide, fossil [air, non-urban air or from high stacks]: 7.1 kg; lognormal variance with pedigree 0.0581, pedigree (1,2,5,1,3)
  Literature Value. Emission data for the motor mower were taken from Stadler et al. (1999).
- Carbon monoxide, fossil [air, non-urban air or from high stacks]: 1.9 kg; lognormal variance with pedigree 0.692, pedigree (1,4,5,1,1)
  Literature Value. Emission data for the motor mower were taken from Stadler et al. (1999).
- Chromium III [air, non-urban air or from high stacks]: 1.5e-7 kg; lognormal variance with pedigree 0.6981, pedigree (1,2,5,1,3)
  Literature Value. Emission data for the motor mower were taken from Stadler et al. (1999).
- Copper ion [air, non-urban air or from high stacks]: 5.1e-6 kg; lognormal variance with pedigree 0.6981, pedigree (1,2,5,1,3)
  Literature Value. Emission data for the motor mower were taken from Stadler et al. (1999).
- Dinitrogen monoxide [air, non-urban air or from high stacks]: 0.00039 kg; lognormal variance with pedigree 0.0981, pedigree (1,2,5,1,3)
  Literature Value. Emission data for the motor mower were taken from Stadler et al. (1999).
- Lead II [air, non-urban air or from high stacks]: 0.000438 kg; lognormal variance with pedigree 0.6981, pedigree (1,2,5,1,3)
  Literature Value. Emission data for the motor mower were taken from Stadler et al. (1999).
- Methane, fossil [air, non-urban air or from high stacks]: 0.00876 kg; lognormal variance with pedigree 0.0981, pedigree (1,2,5,1,3)
  Literature Value. Emission data for the motor mower were taken from Stadler et al. (1999).
- NMVOC, non-methane volatile organic compounds [air, non-urban air or from high stacks]: 0.0328 kg; lognormal variance with pedigree 0.082, pedigree (1,4,5,1,1)
  Literature Value. Emission data for the motor mower were taken from Stadler et al. (1999).
- Nickel II [air, non-urban air or from high stacks]: 2.1e-7 kg; lognormal variance with pedigree 0.6981, pedigree (1,2,5,1,3)
  Literature Value. Emission data for the motor mower were taken from Stadler et al. (1999).
- Nitrogen oxides [air, non-urban air or from high stacks]: 0.06 kg; lognormal variance with pedigree 0.082, pedigree (1,4,5,1,1)
  Literature Value. Emission data for the motor mower were taken from Stadler et al. (1999).
- PAH, polycyclic aromatic hydrocarbons [air, non-urban air or from high stacks]: 5.77e-6 kg; lognormal variance with pedigree 0.3581, pedigree (1,2,5,1,3)
  Literature Value. Emission data for the motor mower were taken from Stadler et al. (1999).
- Particulate Matter, < 2.5 um [air, non-urban air or from high stacks]: 0.00797 kg; lognormal variance with pedigree 0.3581, pedigree (1,2,5,1,3)
  Literature Value. Emission data for the motor mower were taken from Stadler et al. (1999).
- Selenium IV [air, non-urban air or from high stacks]: 3e-8 kg; lognormal variance with pedigree 0.0981, pedigree (1,2,5,1,3)
  Literature Value. Emission data for the motor mower were taken from Stadler et al. (1999).
- Sulfur dioxide [air, non-urban air or from high stacks]: 0.000216 kg; lognormal variance with pedigree 0.0581, pedigree (1,2,5,1,3)
  Literature Value. Emission data for the motor mower were taken from Stadler et al. (1999).
- Zinc II [air, non-urban air or from high stacks]: 3e-6 kg; lognormal variance with pedigree 0.6981, pedigree (1,2,5,1,3)
  Literature Value. Emission data for the motor mower were taken from Stadler et al. (1999).
- Cadmium II [soil, agricultural]: 4.23e-7 kg; lognormal variance with pedigree 0.082, pedigree (1,4,5,1,1)
  Literature Value. Emission data for the motor mower were taken from Stadler et al. (1999).
- Lead II [soil, agricultural]: 1.85e-6 kg; lognormal variance with pedigree 0.082, pedigree (1,4,5,1,1)
  Literature Value. Emission data for the motor mower were taken from Stadler et al. (1999).
- Zinc II [soil, agricultural]: 0.00112 kg; lognormal variance with pedigree 0.082, pedigree (1,4,5,1,1)
  Literature Value. Emission data for the motor mower were taken from Stadler et al. (1999).

## Sampling procedure
Data on fuel consumption and emissions of CO, HC and NOx are expert estimations based on measurements for comparable activities. The other emissions were calculated basing on literature data and the measured fuel consumption.

## Extrapolations
Processes are typical procedures for Switzerland around the year 2000, they are not statistical average processes.

## Review by Roland Hischier 2003-08-06
Passed.

## Review by Roland Hischier 2011-09-28
Transfer of documentation done.
