# electricity, high voltage, production mix

Dataset: EcoSpold 2, unit process, production mix
Geography: CH
Time period: 2014-01-01 to 2022-12-31
Scenario: Business-as-Usual
System model: Allocation at the point of substitution
Generated by: [System]
Database: ecoinvent
isCopyrightProtected: true
accessRestrictedTo: 1

## Reference product
- electricity, high voltage: 1 kWh; By-product classification allocatable product; CPC 17100: Electrical energy
  production volume 4.38512e10 kWh
    The shares of electricity technologies on this market are valid for the year 2020. They have been calculated by the data provider and don't necessarily correspond with the production volumes entered in the undefined datasets of the different electricity producers. The shares have been calculated based on statistics from 2020: Swiss Federal Office of Energy SFOE, Swiss Electricity Statistics 2021; (https://www.bfe.admin.ch/bfe/en/home.html). Most countries in ecoinvent are modelled based on electricity production statistics (domestic production) plus electricity imports from neighbouring countries. For Switzerland, the Swiss electricity supply mix based on guarantees of origin is modelled. As such, the Swiss electricity market is fully based on virtual trade and shall not be mixed up with any physical production in Switzerland.
  properties: EcoSpold01Allocation_undefined_1 0.0933554, EcoSpold01Allocation_undefined_10 0.0933554, EcoSpold01Allocation_undefined_11 0.0933554, EcoSpold01Allocation_undefined_12 0.0933554, EcoSpold01Allocation_undefined_13 0.0933554, EcoSpold01Allocation_undefined_14 0.0933554, EcoSpold01Allocation_undefined_15 0.0933554, EcoSpold01Allocation_undefined_16 0.113848, EcoSpold01Allocation_undefined_2 0.0933554, EcoSpold01Allocation_undefined_3 0.113848, EcoSpold01Allocation_undefined_4 0, EcoSpold01Allocation_undefined_5 0.0933554, EcoSpold01Allocation_undefined_6 0.0933554, EcoSpold01Allocation_undefined_7 0.0933554, EcoSpold01Allocation_undefined_8 0.0933554, EcoSpold01Allocation_undefined_9 0.0933554, allocation factor 0.0222335, carbon allocation 0 kg, carbon content 0, exergy 0.102896 MJ, price 0.0977 EUR2005, true value 0.00634527, true value relation 0.102896

## Inputs from technosphere
- electricity, high voltage: 0.102091, 0.000842927, 0.000366807, 0.373402, 0.156997, 0.00223295, 0.327802 kWh (7 suppliers, which the file names only by identifier); sum of these 0.963735 kWh
  properties: price 0.0977 EUR2005
- electricity, high voltage: 0.00144449 kWh
  properties: EcoSpold01Allocation_undefined_1 82, EcoSpold01Allocation_undefined_10 82, EcoSpold01Allocation_undefined_11 82, EcoSpold01Allocation_undefined_12 82, EcoSpold01Allocation_undefined_13 82, EcoSpold01Allocation_undefined_14 82, EcoSpold01Allocation_undefined_15 82, EcoSpold01Allocation_undefined_16 100, EcoSpold01Allocation_undefined_2 82, EcoSpold01Allocation_undefined_3 100, EcoSpold01Allocation_undefined_5 82, EcoSpold01Allocation_undefined_6 82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
- electricity, high voltage: 0.0278412, 0.00697918 kWh (2 suppliers, which the file names only by identifier); sum of these 0.0348203 kWh
  properties: exergy 3.6 MJ, price 0.0977 EUR2005
