# cement, unspecified, import from Europe

Dataset: EcoSpold 2, unit process
Geography: CH
Time period: 2022-01-01 to 2022-12-31
Technology level: current
Classification: ISIC rev.4 ecoinvent: 2394:Manufacture of cement, lime and plaster
Scenario: Business-as-Usual
System model: Allocation at the point of substitution
Generated by: Daniela Baumann
Database: ecoinvent
isCopyrightProtected: true

## General comment
This dataset represents the amount of imported cement, unspecified from Europe to Switzerland. The import value is assumed to be valid for the current year.

## Included activities start
This activity represents the point of 'handing over' the cement, unspecified from one country to the other at the border.

## Time period
The annual production volume is assumed to be valid for the current year.

## Reference product
- cement, unspecified: 1 kg; By-product classification allocatable product; CPC 374: Plaster, lime and cement
  production volume 1.18198e8 kg
    Calculated value.
    There are many different specific types of cement present in the ecoinvent database. It is estimated, that 20% of these specific types can be replaced by another type of cement. The sum of all production volumes feeding the generic market for cement, unspecified /CH is 8.42E+08 kg.
    Total production volume of hydraulic cement in Switzerland in 2019: 4.21E+09 kg. Source: USGS (2019). U.S. Geological Survey, Minerals Yearbook Annual Tables, 2019. Available at: https://www.usgs.gov/centers/national-minerals-information-center/cement-statistics-and-information
    The total exports in 2019 of cement from Switzerland were 1.06E+08 kg (2.5% of the production). Out of that 99.99% was exported to other european countries. The total imports in 2019 of cement to Switzerland were 6.88E+08 kg (16.3% from the total amount consumed). Out of that 99.93% was imported from other european countries. Source: trade statistics of Switzerland 2019. Available at: https://www.swiss-impex.admin.ch/pages/bereiche/waren/result.xhtml (accessed 20220726)
    The ratio between local Swiss production of cement, unspecified (8.42E+08 kg) and imports from the European market is 86:14, resulting in 1.18E+08 kg production volume of the import.
  property price 0.0615 EUR2005
    2005 import and export prices (total trades (USD) divided by total weight (kg) in China, India, USA, Japan, Russia and Europe, major producers and consumers (http://www.cementchina.net/freport/showfre.asp?id=749) from UN Commodity Trade Statistics Database (http://data.un.org/Explorer.aspxDatabase [Accessed 2 July 2010]). Commodity: Cement (portland, aluminious, slag or hydraulic)
  properties: carbon allocation 0 kg, carbon content 0, carbon content, fossil 0, carbon content, non-fossil 0, dry mass 1 kg, water content 0, water in wet mass 0 kg, wet mass 1 kg

## Inputs from technosphere
- cement, unspecified: 1 kg
  activityLink added to better reflect the reality of the supply chain
  properties: dry mass 1 kg, wet mass 1 kg
