# solid manure loading and spreading, by hydraulic loader and spreader

Dataset: EcoSpold 2, unit process
Geography: RoW
Time period: 1991-01-01 to 2022-12-31
Technology level: current
Classification: ISIC rev.4 ecoinvent: 0161:Support activities for crop production
Classification: EcoSpold01Categories: agricultural means of production/work processes
Tags: ConvertedDataset
Scenario: Business-as-Usual
System model: Allocation at the point of substitution
Generated by: Silvio Blaser
Published in: Nemecek, T. 2007
Database: ecoinvent
isCopyrightProtected: true

## General comment
Solid manure loading with hydraulic loader (power take-off driven) from dung slab on manure spreader. Solid manure spreading with manure spreader. Working load 5t, solid manure production and emissions from slurry and manure not included. FU is one kg of solid manure loaded and spreaded.
[This dataset was already contained in the ecoinvent database version 2. It was not individually updated during the transfer to ecoinvent version 3. Life Cycle Impact Assessment results may still have changed, as they are affected by changes in the supply chain, i.e. in other datasets. This dataset was generated following the ecoinvent quality guidelines for version 2. It may have been subject to central changes described in the ecoinvent version 3 change report (http://www.ecoinvent.org/database/ecoinvent-version-3/reports-of-changes/), and the results of the central updates were reviewed extensively. The changes added e.g. consistent water flows and other information throughout the database. The documentation of this dataset can be found in the ecoinvent reports of version 2, which are still available via the ecoinvent website. The change report linked above covers all central changes that were made during the conversion process.]

## Included activities end
The inventory takes into account the diesel fuel consumption and the amount of agricultural machinery and of the shed, which has to be attributed to the manure loading and spreading. Also taken into consideration is the amount of emissions to the air from combustion and the emission to the soil from tyre abrasion during the work process. The following activities where considered part of the work process: preliminary work at the farm, like attaching the adequate machine to the tractor; transfer to field (with an assumed distance of 1 km); field work (for a parcel of land of 1 ha surface); transfer to farm and concluding work, like uncoupling the machine. The overlapping during the field work is considered. The amount of spread material is not taken into account. Not included are dust other than from combustion and noise.

## Geography
The inventories are based on measurements made by the FAT, in Switzerland.

## Technology
Emissions and fuel consumption by the newest models of tractors set into operation during the period from 1999 to 2001.

## Time period
Measurements were made in the last few years (1999-2001).

## Reference product
- solid manure loading and spreading, by hydraulic loader and spreader: 1 kg; By-product classification allocatable product; CPC 86119: Other support services to crop production
  EcoSpold01Location=CH
  production volume 3.17163e11 kg
    FAOSTAT data year 2010: manure applied to soils, 50% assumed and solid, total N content 15.1 kg N/t solid manure. 60% of mechanisation assumed.
  property price 0.00110452 EUR2005
    Calculated based on inputs: The price of the product has been calculated as a sum of the values of the material and energy inputs for this product. This value is therefore a rough estimation. It may underestimate the real price since there are additional expenses when producing any product. These expences can include for example labour costs, treatment of waste materials and profit for the producer. Please consider carefully whether this level of data quality is acceptable for your application.
  properties: carbon allocation 0 kg, carbon content 0

## Inputs from technosphere
- agricultural machinery, unspecified: 0.000189 kg; lognormal variance with pedigree 0.044, pedigree (1,4,5,5,1)
  EcoSpold01Location=CH
- diesel: 3.89127e-5, 1.92806e-5, 3.93964e-6, 8.09709e-5, 2.72568e-6, 0.000384243, 9.26899e-7 kg (7 suppliers, which the file names only by identifier); sum of these 0.000531 kg; lognormal variance with pedigree 0.044, pedigree (1,4,5,5,1)
  EcoSpold01Location=CH
  properties: carbon content, fossil 0.865, dry mass 1 kg, heating value, net 42.8 MJ, wet mass 1 kg
  note on carbon content, fossil: C-content of diesel is 86.5% (ecoinvent v2.2 report 6_IV, Tab 3.14)
- shed: 4.4e-7 m2; lognormal variance with pedigree 0.344, pedigree (1,4,5,5,1)
  EcoSpold01Location=CH
- tractor, 4-wheel, agricultural: 5.88e-5 kg; lognormal variance with pedigree 0.044, pedigree (1,4,5,5,1)
  EcoSpold01Location=CH

## Emissions to nature
- Ammonia [air, non-urban air or from high stacks]: 1.06e-8 kg; lognormal variance with pedigree 0.1001, pedigree (1,2,5,5,3)
- Benzene [air, non-urban air or from high stacks]: 3.88e-9 kg; lognormal variance with pedigree 0.1001, pedigree (1,2,5,5,3)
- Benzo(a)pyrene [air, non-urban air or from high stacks]: 1.59e-11 kg; lognormal variance with pedigree 0.7001, pedigree (1,2,5,5,3)
- Cadmium II [air, non-urban air or from high stacks]: 5.31e-12 kg; lognormal variance with pedigree 0.7001, pedigree (1,2,5,5,3)
- Carbon dioxide, fossil [air, non-urban air or from high stacks]: 0.00165 kg; lognormal variance with pedigree 0.0601, pedigree (1,2,5,5,3)
- Carbon monoxide, fossil [air, non-urban air or from high stacks]: 3.17e-6 kg; lognormal variance with pedigree 0.694, pedigree (1,4,5,5,1)
- Chromium III [air, non-urban air or from high stacks]: 2.65e-11 kg; lognormal variance with pedigree 0.7001, pedigree (1,2,5,5,3)
- Copper ion [air, non-urban air or from high stacks]: 9.03e-10 kg; lognormal variance with pedigree 0.7001, pedigree (1,2,5,5,3)
- Dinitrogen monoxide [air, non-urban air or from high stacks]: 6.37e-8 kg; lognormal variance with pedigree 0.1001, pedigree (1,2,5,5,3)
- Methane, fossil [air, non-urban air or from high stacks]: 6.85e-8 kg; lognormal variance with pedigree 0.1001, pedigree (1,2,5,5,3)
- NMVOC, non-methane volatile organic compounds [air, non-urban air or from high stacks]: 1.59e-6 kg; lognormal variance with pedigree 0.084, pedigree (1,4,5,5,1)
- Nickel II [air, non-urban air or from high stacks]: 3.72e-11 kg; lognormal variance with pedigree 0.7001, pedigree (1,2,5,5,3)
- Nitrogen oxides [air, non-urban air or from high stacks]: 2.41e-5 kg; lognormal variance with pedigree 0.084, pedigree (1,4,5,5,1)
- PAH, polycyclic aromatic hydrocarbons [air, non-urban air or from high stacks]: 1.75e-9 kg; lognormal variance with pedigree 0.3601, pedigree (1,2,5,5,3)
- Particulate Matter, < 2.5 um [air, non-urban air or from high stacks]: 2.25e-6 kg; lognormal variance with pedigree 0.3601, pedigree (1,2,5,5,3)
- Selenium IV [air, non-urban air or from high stacks]: 5.31e-12 kg; lognormal variance with pedigree 0.1001, pedigree (1,2,5,5,3)
- Sulfur dioxide [air, non-urban air or from high stacks]: 5.35e-7 kg; lognormal variance with pedigree 0.0601, pedigree (1,2,5,5,3)
- Zinc II [air, non-urban air or from high stacks]: 5.31e-10 kg; lognormal variance with pedigree 0.7001, pedigree (1,2,5,5,3)
- Cadmium II [soil, agricultural]: 3.58e-11 kg; lognormal variance with pedigree 0.084, pedigree (1,4,5,5,1)
- Lead II [soil, agricultural]: 1.61e-10 kg; lognormal variance with pedigree 0.084, pedigree (1,4,5,5,1)
- Zinc II [soil, agricultural]: 9.33e-8 kg; lognormal variance with pedigree 0.084, pedigree (1,4,5,5,1)

## Sampling procedure
The inventoried HC, NOx, CO and fuel consumption values are measurements made following two test cycles (ISO 8178 C1 test and a specific 6-level-test created by the FAT) and on measurements made during the field work. The other emissions were calculated basing on literature data and the measured fuel consumption.

## Extrapolations
Values given in the reference are representative for the chosen work processes. Processes are typical procedures for Switzerland around the year 2000, they are not statistical average processes. This dataset has been copied from an original dataset covering the geography CH. The uncertainty has been adjusted accordingly.

## Review by Roland Hischier 2003-08-06
Passed.

## Review by Emilia Moreno Ruiz 2014-04-08
PV adjusted
