# sewer grid construction, urban

Dataset: EcoSpold 2, unit process
Geography: GLO
Time period: 2010-01-01 to 2022-12-31
Technology level: current
Classification: ISIC rev.4 ecoinvent: 4220:Construction of utility projects
Tags: ConvertedDataset
Scenario: Business-as-Usual
System model: Allocation at the point of substitution
Generated by: Nikolia Stoikou
Database: ecoinvent
isCopyrightProtected: true

## General comment
The activity represents the construction of a sewer system for wastewater. The sewer system is used to transport 1 m3 sewered wastewater to the treatment plant and transports on average 1.2E11 l wastewater per year. The lifetime of the sewer system is 100 years including a renovation after 70 years.

## Included activities start
The activity starts with the building materials available in the construction site.

## Included activities end
The process includes building materials, end-of-life of the building materials, water consumption, machinery use and fuel input.

## Technology
Underground sewer system for transportation of wastewater with pipes

## Reference product
- sewer grid, urban: 1 m3; By-product classification allocatable product; CPC 53253: Sewage and water treatment plants
  1 m3 of wastewater sewered
  production volume 1.09631e11 m3
    proxy value to transfer the highest amount of wastewater PV generated in the database
  property price 0.018539 EUR2005
    Calculated based on inputs: The price of the product has been calculated as a sum of the values of the material and energy inputs for this product. This value is therefore a rough estimation. It may underestimate the real price since there are additional expenses when producing any product. These expences can include for example labour costs, treatment of waste materials and profit for the producer. Please consider carefully whether this level of data quality is acceptable for your application.
  properties: carbon allocation 0 kg, carbon content 0, lifetime 100 year

## Inputs from technosphere
- cast iron: 0.000670706 kg; lognormal variance with pedigree 0.3247, pedigree (2,2,3,5,1)
  Doka G., 2021. A model for composition-specific life cycle inventories of regionalised wastewater fates, Separate publication, Doka LCA,Zurich, Switzerland. http://www.doka.ch/publications.htm
  properties: carbon content, fossil 0.04, dry mass 1 kg, wet mass 1 kg
- cement mortar: 2.03552e-7, 0.000162123, 8.15713e-7 kg (3 suppliers, which the file names only by identifier); sum of these 0.000163143 kg; lognormal variance with pedigree 0.3247, pedigree (2,2,3,5,1)
  (same comment as for cast iron)
  properties: dry mass 1 kg, wet mass 1 kg
- cement, unspecified: 0.0128362 kg; lognormal variance with pedigree 0.3247, pedigree (2,2,3,5,1)
  (same comment as for cast iron)
  properties: dry mass 1 kg, wet mass 1 kg
- concrete, normal strength: 4.03528e-5 m3; lognormal variance with pedigree 0.3247, pedigree (2,2,3,5,1)
  The concrete mass is calculated in volume by using 2400 kg/m3 as density. Data from one inventory study (Labhardt 1996)
  properties: dry mass 2190 kg, water content 0.086758, wet mass 2380 kg
- diesel, burned in building machine: 0.00259958 MJ; lognormal variance with pedigree 0.3247, pedigree (2,2,3,5,1)
  (same comment as for cast iron)
  properties: heating value, gross 45.4 MJ, heating value, net 1 MJ
- electricity, medium voltage: 0.00215109 kWh; lognormal variance with pedigree 0.3247, pedigree (2,2,3,5,1)
  (same comment as for cast iron)
  properties: price 0.1 EUR2005
- excavation, hydraulic digger: 8.42078e-6 m3; lognormal variance with pedigree 0.3247, pedigree (2,2,3,5,1)
  (same comment as for cast iron)
- extrusion, plastic pipes: 0.00534376 kg; lognormal variance with pedigree 0.3247, pedigree (2,2,3,5,1)
  extrusion of PVC, PE, PP
- gravel, crushed: 2.06761e-5, 0.01566, 0.0601089, 0.000313167, 0.00342073 kg (5 suppliers, which the file names only by identifier); sum of these 0.0795234 kg; lognormal variance with pedigree 0.3247, pedigree (2,2,3,5,1)
  (same comment as for cast iron)
  properties: dry mass 1 kg, wet mass 1 kg
- polyethylene, high density, granulate: 0.00494165 kg; lognormal variance with pedigree 0.3247, pedigree (2,2,3,5,1)
  (same comment as for cast iron)
  properties: carbon content, fossil 0.857143, dry mass 1 kg, heating value, net 42.47 MJ, wet mass 1 kg
- polypropylene, granulate: 0.000207219 kg; lognormal variance with pedigree 0.3247, pedigree (2,2,3,5,1)
  (same comment as for cast iron)
  properties: carbon content, fossil 0.857143, dry mass 1 kg, heating value, net 32.78 MJ, wet mass 1 kg
- polyvinylchloride, emulsion polymerised: 0.000194889 kg; lognormal variance with pedigree 0.3247, pedigree (2,2,3,5,1)
  (same comment as for cast iron)
  properties: carbon content, fossil 0.387097, dry mass 1 kg, heating value, net 21.5 MJ, wet mass 1 kg
- reinforcing steel: 0.00396982 kg; lognormal variance with pedigree 0.3247, pedigree (2,2,3,5,1)
  (same comment as for cast iron)
  properties: carbon content, fossil 0.004, dry mass 1 kg, wet mass 1 kg
- sand: 0.000655445, 3.40276e-6, 7.8478e-6, 0.0426536 kg (4 suppliers, which the file names only by identifier); sum of these 0.0433203 kg; lognormal variance with pedigree 0.3247, pedigree (2,2,3,5,1)
  (same comment as for cast iron)
  properties: dry mass 1 kg, wet mass 1 kg
- steel, chromium steel 18/8, hot rolled: 0.00137766 kg; lognormal variance with pedigree 0.3247, pedigree (2,2,3,5,1)
  (same comment as for cast iron)
  properties: carbon content, fossil 0.0008, dry mass 1 kg, wet mass 1 kg
  note on carbon content, fossil: Stainless steel model is the grade 304 steel (18/8 stainless, 18% chromium 8% nickel; max. 0.08% C)
- synthetic rubber: 3.62548e-5 kg; lognormal variance with pedigree 0.3247, pedigree (2,2,3,5,1)
  (same comment as for cast iron)
  properties: carbon content, fossil 0.871949, dry mass 1 kg, heating value, net 26.42 MJ, wet mass 1 kg
- tap water: 2.58822 kg; name tap_water; lognormal variance with pedigree 0.3247, pedigree (2,2,3,5,1)
  (same comment as for cast iron)
  properties: carbon content, fossil 0.00178991, dry mass 0.000337476 kg, water content 2962.17, wet mass 1 kg
- waste concrete, not reinforced: -0.00633716, -6.7147e-5, -0.0904424 kg (3 suppliers, which the file names only by identifier); sum of these -0.0968467 kg; lognormal variance with pedigree 0.3229, pedigree (2,2,2,5,1)
  (same comment as for cast iron)
  production volume
    Calculated from the production volume of sewer grid, 1.2E11l/year in proportion to the respective output amounts.
  properties: dry mass 1 kg, wet mass 1 kg
- waste polyethylene: -0.000571839, -1.49858e-5, -0.00400319, -3.82081e-5, -2.88962e-6, -1.57813e-5, -6.37547e-6, -0.000495603 kg (8 suppliers, which the file names only by identifier); sum of these -0.00514887 kg; lognormal variance with pedigree 0.3229, pedigree (2,2,2,5,1)
  (same comment as for cast iron)
  production volume
    (same comment as for waste concrete, not reinforced)
  properties: carbon content, fossil 0.825301, dry mass 0.996 kg, heating value, net 42.47 MJ, water content 0.00401606, wet mass 1 kg
- waste polyvinylchloride: -1.09374e-7, -5.67226e-7, -2.41317e-7, -5.97336e-7, -1.44621e-6, -2.16446e-5, -1.8759e-5, -0.000151524 kg (8 suppliers, which the file names only by identifier); sum of these -0.000194889 kg; lognormal variance with pedigree 0.3229, pedigree (2,2,2,5,1)
  (same comment as for cast iron)
  production volume
    (same comment as for waste concrete, not reinforced)
  properties: carbon content, fossil 0.440882, dry mass 0.998 kg, heating value, net 21.51 MJ, water content 0.00200401, wet mass 1 kg
- waste rubber, unspecified: -7.45339e-7, -1.77547e-5, -1.77547e-5 kg (3 suppliers, which the file names only by identifier); sum of these -3.62548e-5 kg; lognormal variance with pedigree 0.3229, pedigree (2,2,2,5,1)
  (same comment as for cast iron)
  production volume
    (same comment as for waste concrete, not reinforced)
  properties: carbon content, fossil 0.853, dry mass 1 kg, heating value, net 27.19 MJ, wet mass 1 kg

## Emissions to nature
- Water [air, unspecified]: 0.000388233 m3; = (tap_water*15%)/1000; lognormal variance with pedigree 0.0447, pedigree (2,2,3,5,1)
  15% of tap water
- Water [water, unspecified]: 0.00219999 m3; = (tap_water*85%)/1000; lognormal variance with pedigree 0.0447, pedigree (2,2,3,5,1)
  85% of tap water

## Extrapolations
Specific to the technology mix and human settlement structure encountered in Switzerland around 1996.
