# evaporation of natural gas

Dataset: EcoSpold 2, unit process
Geography: BR
Time period: 2018-01-01 to 2022-12-31
Technology level: current
Classification: EcoSpold01Categories: natural gas/production
Classification: ISIC rev.4 ecoinvent: 3520:Manufacture of gas; distribution of gaseous fuels through mains
Synonyms: LNG
Scenario: Business-as-Usual
System model: Allocation at the point of substitution
Share of production covered: 0 %
Generated by: F. Valebona; T. B. Rocha; F. L. Motta
Database: ecoinvent
isCopyrightProtected: false

## General comment
This dataset describes the process of evaporation of the liquified natural gas in Brazil. This dataset considers the needed input of natural gas, the energy consumption as well as the infrastructure. This dataset is a re-contextualization of the ‘evaporation of natural gas’ dataset for the Japanese region, originally valid for the period of 2000-2005, available in database version 3.6. The uncertainties and production volumes were adjusted to represent the Brazilian geography and the updated validity period (2018-2021).

## Included activities start
The activity starts with the arrival of natural gas, liquefied.

## Included activities end
The activity ends with the production of natural gas, high pressure.

## Geography
Brazil.

## Technology
average technology assumed

## Time period
Data is assumed to be valid from 2018 to 2021.

## Reference product
- natural gas, high pressure: 1 m3; By-product classification allocatable product; CPC 12020: Natural gas, liquefied or in the gaseous state; CAS 14493-06-2
  EcoSpold01Location=JP
  production volume 2.76622e9 m3
    m³ of evaporated LNG in 2018 according to the statistical yearbook published by the Petroleum, Gas and Biofuels National Agency (ANP, 2019). The amount refers to the evaporated volume (0.84 kg/m³). The share of natural gas sources for the Brazilian market is 14% imported from Bolivia, 14% from Brazilian onshore fields, 57% from Brazilian offshore fields and 7% from LNG imported from several countries.
    Reference:
    [ANP 2019]
    Agência Nacional do Petróleo, Gás Natural e Biocombustíveis (2019). Anuário Estatístico 2019. Available at: www.anp.gov.br/publicacoes/anuario-estatistico/5237-anuario-estatistico-2019. Accessed in 04/06/2020.
  property carbon content, fossil 0.602381
    An average C content of 0.506 kg C/ m3 has been assumed (this average has been calculated using data in Tab 3.5, ecoinvent v2.2 report 6_V
  property heating value, net 36 MJ
    Literature value, Source: Christoph Meili;Niels Jungbluth;Maresa Bussa (2021) Life cycle inventories of crude oil and natural gas extraction. ESU-services Ltd. commissioned by BAFU & VSG, Schaffhausen, Switzerland, http://esu-services.ch/data/public-lci-reports/
  property price 0.166 EUR2005
    Temporary price data. Calculated as 90% of purchasers price based on: 2005 price for Europe-27 Import (US$ and kg) in UN Commodity Trade Statistics Database - Natural gas in gaseous state (http://data.un.org/Data.aspx?q=natural+gas&d=ComTrade&f=_l1Code%3a28%3bcmdCode%3a271121; accessed 4 January 2011), using density of natural gas of 0.8 kg/m3 for unit conversion.
  properties: carbon allocation 0.506 kg, carbon content 0.602381, carbon content, non-fossil 0, dry mass 0.84 kg, water content 0, water in wet mass 0 kg, wet mass 0.84 kg

## Inputs from technosphere
- electricity, medium voltage: 0.051336 kWh; lognormal variance with pedigree 0.0606, pedigree (1,3,5,5,3)
  Environmental Report for Italian Plant.
  EcoSpold01Location=DZ
  Uncertainty: Environmental Report for Italian Plant, emissions are already included in this dataset
- natural gas processing plant: 7.89e-13 unit; lognormal variance with pedigree 0.39, pedigree (4,4,5,5,3)
  EcoSpold01Location=GLO
  Estimation for infrastructure
  Uncertainty: Estimation for infrastructure
- natural gas, liquefied: 1 m3; lognormal variance with pedigree 0.0002, pedigree (1,1,2,1,1)
  Natural gas input
  Uncertainty: Natural gas input
  property carbon content, fossil 0.602381; name C_content_fossil
  property dry mass 0.84 kg; name DM
  property wet mass 0.84 kg; name WM
  properties: heating value, net 36 MJ
  note on carbon content, fossil: An average C content of 0.506 kg C/ Nm3 has been assumed for natural gas (this average has been calculated using data in Tab 3.5, ecoinvent v2.2 report 6_V). It equals 0.60238 kg C per 0.84kg dry mass.
  note on heating value, net: Literature value, Source: Christoph Meili;Niels Jungbluth;Maresa Bussa (2021) Life cycle inventories of crude oil and natural gas extraction. ESU-services Ltd. commissioned by BAFU & VSG, Schaffhausen, Switzerland, http://esu-services.ch/data/public-lci-reports/

## Sampling procedure
This dataset is a copy of the evaporation of natural gas’ dataset for the Japanese region, valid for the period of 2000-2005, available in database version 3.6. The electricity mix is adapted to the Brazilian region.

## Extrapolations
Energy consumption is extrapolated from an Italian plant. The uncertainties were adjusted accordingly.
