# operation, dried roughage store, cold-air dried, conventional

Dataset: EcoSpold 2, unit process
Geography: CA-QC
Time period: 1994-01-01 to 2022-12-31
Technology level: current
Classification: EcoSpold01Categories: agricultural means of production/buildings
Classification: ISIC rev.4 ecoinvent: 0163:Post-harvest crop activities
Tags: Operation
Scenario: Business-as-Usual
System model: Allocation at the point of substitution
Generated by: François Saunier
Database: ecoinvent
isCopyrightProtected: true

## General comment
The functional unit is 1 kg of dry matter hay.This module should be used when evaluating storage of hay at farm, in a ventilated storey barn. Dataset based on GLO parent dataset. The only differences with the parent dataset are (1) the production volume, which now represents the production volume in Quebec; (2) Data Quality Pedigree indicators which was modified to account for the fact that GLO data is used to represent Quebec activities; (3) the geographical location and (4) energy demand which has been adapted acordingly to Quebec specificity.
[This dataset was already contained in the ecoinvent database version 2. It was not individually updated during the transfer to ecoinvent version 3. Life Cycle Impact Assessment results may still have changed, as they are affected by changes in the supply chain, i.e. in other datasets. This dataset was generated following the ecoinvent quality guidelines for version 2. It may have been subject to central changes described in the ecoinvent version 3 change report (http://www.ecoinvent.org/database/ecoinvent-version-3/reports-of-changes/), and the results of the central updates were reviewed extensively. The changes added e.g. consistent water flows and other information throughout the database. The documentation of this dataset can be found in the ecoinvent reports of version 2, which are still available via the ecoinvent website. The change report linked above covers all central changes that were made during the conversion process.]

## Included activities start
This activity starts with dried hay at farm barn storey.

## Included activities end
This activity ends with dried hay at farm barn storey.
The dataset includes the energy demand (supplied by consumption of electricity) for ventilating the storey. Also included in the inventory is the infrastructure (building).
The dataset does not include waste and direct emissions (like dust).

## Geography
The inventories are based on Quebec technical data (for energy consumption) and indications made by drying plants in Switzerland (for parent data).

## Technology
Storage of hay at farm in a ventilated storey barn, at ambiant temperature. Roughage is usually conditionned in smales bales. Fan motor power is 5 HP. During storage, roughage moisture content is usually lowered from 20% to 11% moisture content.
References :
BEAUREGARD, G. (2013). Production budget of agricultural productions in Quebec. Technical report for CIRAIG.
CRAAQ (2010). Séchage des grains - Données techniques. AGDEX 736, juin 2010, 6p. [Centre de Référence en Agriculture et Agroalimentaire du Québec]

## Time period
Period indicated in the reference for parent data.

Electricity consumption is based on a 2010 report from the CRAAQ and might be representative of more recent time.

## Parameters
- quebec cropped area: 1.87476e6 ha; name qc_crop_area; lognormal variance with pedigree 0.0006, pedigree (1,1,1,1,1)
  Land in crops, Quebec, in 2011. Source: Statistics Canada, 2013. Table 004-0002 - Census of Agriculture, total area of farms and use of farm land, CANSIM (database). (accessed: 2013-11-15) ("Land in crops" includes field crops, vegetables, fruits and nursery crops, and sod.) Statistics Canada
- world arable land area: 1.39628e9 ha; name world_arable_area; lognormal variance with pedigree 0.0006, pedigree (1,1,1,1,1)
  Arable land area, World, in 2011. Source: FAOSTAT, 2013

## Reference product
- operation, dried roughage store, cold-air dried, conventional: 1 kg; By-product classification allocatable product; CPC 86111: Post-harvest crop services
  production volume 0.00537073 kg
    Gross approximation of Quebec production volume using relative value of Quebec cropped area to world arable area.
  property price 0.0267361 EUR2005
    Calculated based on inputs: The price of the product has been calculated as a sum of the values of the material and energy inputs for this product. This value is therefore a rough estimation. It may underestimate the real price since there are additional expenses when producing any product. These expences can include for example labour costs, treatment of waste materials and profit for the producer. Please consider carefully whether this level of data quality is acceptable for your application.
  properties: carbon allocation 0 kg, carbon content 0

## Inputs from technosphere
- dried roughage store, cold-air dried, conventional: 0.000253 m3; lognormal variance with pedigree 0.4627, pedigree (2,2,5,5,5)
  This data has been copied from the original GLO dataset. The uncertainty has been adjusted accordingly.
  Uncertainty: T
- electricity, low voltage: 0.049 kWh; lognormal variance with pedigree 0.0407, pedigree (1,2,5,1,1)
  Literature value. Electricity is used for operating the impeller blower and the ventilation system.

## Extrapolations
Dataset based on GLO parent dataset..
Infrastructure data are kept from parent dataset and may not be representative of the geography and the technology. The uncertainty has been adjusted accordingly.

## Review by Bo Weidema 2013-12-11
Global dataset in need of revision. When Global production volume is updated, the formula for the production volume should be improved.
spelling error: ambiant --> ambient
