# treatment of lignite ash, sanitary landfill

Dataset: EcoSpold 2, unit process
Geography: RoW
Time period: 1994-01-01 to 2022-12-31
Technology level: current
Classification: ISIC rev.4 ecoinvent: 3822:Treatment and disposal of hazardous waste
Classification: EcoSpold01Categories: waste management/sanitary landfill
Tags: ConvertedDataset; Treatment
Scenario: Business-as-Usual
System model: Allocation at the point of substitution
Generated by: Gabor Doka (obsolete)
Published in: Doka G. 2007
Database: ecoinvent
isCopyrightProtected: true

## General comment
Inventoried waste contains 100% lignite ash small scale; .
waste composition (wet, in ppm): upper heating value 2.578 MJ/kg; H2O n.a.; O 83797; H n.a.; C 100000; S n.a.; N n.a.; P 392; B 2100; Cl n.a.; Br 38.8; F n.a.; I 16.4; Ag n.a.; As 46; Ba 980; Cd 5.49; Co 147; Cr 134.4; Cu 58.5; Hg 0.1; Mn 198; Mo 66.5; Ni 145.5; Pb 47; Sb 38; Se 14; Sn 15.84; V 339.5; Zn 266; Be 9.8; Sc 4.95; Sr 679; Ti 980; Tl 0.19; W n.a.; Si 470400; Fe 52920; Ca 196000; Al 46060; K 5880; Mg 29400; Na 8820;
Share of carbon in waste that is biogenic 0%.
Overall degradability of waste during 100 years: 5%.
[This dataset was already contained in the ecoinvent database version 2. It was not individually updated during the transfer to ecoinvent version 3. Life Cycle Impact Assessment results may still have changed, as they are affected by changes in the supply chain, i.e. in other datasets. This dataset was generated following the ecoinvent quality guidelines for version 2. It may have been subject to central changes described in the ecoinvent version 3 change report (http://www.ecoinvent.org/database/ecoinvent-version-3/reports-of-changes/), and the results of the central updates were reviewed extensively. The changes added e.g. consistent water flows and other information throughout the database. The documentation of this dataset can be found in the ecoinvent reports of version 2, which are still available via the ecoinvent website. The change report linked above covers all central changes that were made during the conversion process.]

## Included activities end
Waste-specific short-term emissions to air via landfill gas incineration and landfill leachate. Burdens from treatment of short-term leachate (0-100a) in wastewater treatment plant (including WWTP sludge disposal in municipal incinerator). Long-term emissions from landfill to groundwater (after base lining failure).

## Geography
Technology encountered in Switzerland in 2000. Landfill includes base seal, leachate collection system, treatment of leachate in municipal wastewater treatment plant.

## Technology
Swiss municipal sanitary landfill for biogenic or untreated municipal waste ('reactive organic landfill'). Landfill gas and leachate collection system. Recultivation and monitoring for 150 years after closure.

## Reference product
- lignite ash: -1 kg; By-product classification Waste; CPC 39: Wastes or scraps
  EcoSpold01Location=CH
  production volume 1.85852e9 kg
    Based on "treatment of lignite ash, municipal incineration" dataset PV (lignite ash incineration PV was calculated as: based on coal usage in residences and small commerce (Exxon 2012), generic split into hard coal and lignite based on demand 2010 (WCA 2012), generic lignite ash content, and a generic global rate of 21.7w% of MSW going to incineration (Pike + UNSD 2012)). The values for "treatment of lignite ash, sanitary landfill" is adjusted for the generic global rate of 67w% MSW sent to landfill (UNSD 2011)(http://unstats.un.org/unsd/environment/wastetreatment.htm, accessed 20151008)
  property heating value, net 21.7 MJ
    Based on literature, page 52, Report 5: Dones, R., Bauer, C., Bolliger, R., Burger, B., faist Emmenegger, M., Frischknecht, R., Heck, T., Jungbluth, N., Röder, A., Tuchschmid, M. (2007) Life Cycle Inventories of Energy Systems: Resulst for current Systems in Switzerland and other UCTE Countries. ecoinvent report No. 5. Paul Scherrer Institut Villigen, Swiss Centre for Life Cycle Inventories, Dübendorf, CH
  property price 0 EUR2005
    Waste products are assigned a price of zero as they are assumed to require further treatment.
  properties: carbon allocation 0.1 kg, carbon content 0.1, carbon content, fossil 0.1, carbon content, non-fossil 0, dry mass 1 kg, water content 0, water in wet mass 0 kg, wet mass 1 kg

## Inputs from technosphere
- aluminium sulfate, powder: 1.4e-6 kg; lognormal variance with pedigree 1.47, pedigree (5,5,5,5,5)
  burden from wastewater treatment of the short-term leachate (0-100a). Uncertainty calculated from unertainty of the waste composition of this waste, uncertainty in waste decomposition and short-term leaching in sanitary landfill
  EcoSpold01Location=RER
  Uncertainty: . Uncertainty calculated from unertainty of the waste composition of this waste, uncertainty in waste decomposition and short-term leaching in sanitary landfill
  properties: dry mass 1 kg, wet mass 1 kg
- cement, unspecified: 0.000215329, 8.07901e-7, 5.28445e-7, 2.13821e-5, 5.63019e-6, 6.7116e-7, 2.65884e-7, 3.43105e-6, 1.29543e-5 kg (9 suppliers, which the file names only by identifier); sum of these 0.000261 kg; lognormal variance with pedigree 0.372, pedigree (1,1,5,5,1)
  EcoSpold01Location=CH
  burden from incineration of sludge from wastewater treatment of the short-term leachate (0-100a). uncertainty is calculated from uncertainties in waste composition and transfer coefficients in incinerator and uncertainty of waste decomposition and short-term leaching in sanitary landfill
  properties: dry mass 1 kg, wet mass 1 kg
- chemical, inorganic: 3.67e-7 kg; lognormal variance with pedigree 0.652, pedigree (1,1,5,5,1)
  EcoSpold01Location=GLO
  burden from incineration of sludge from wastewater treatment of the short-term leachate (0-100a). uncertainty is calculated from uncertainties in waste composition and transfer coefficients in incinerator and uncertainty of waste decomposition and short-term leaching in sanitary landfill
  properties: carbon content, fossil 0.003, dry mass 1 kg, wet mass 1 kg
  note on carbon content, fossil: Tab A.9, ecoinvent report 13_I: 0.1 kg C/kg lignite ash This dataset is an unweighted average of 20 inorganic substances (listed in Tab 88.1, ecoinvent v2.2 report 8, part II), being part of the top100 chemicals included in this database. The C-content has also been calculated as an unweighted average of the C content of the substances composing this dataset.
- chemical, organic: 7.46e-8 kg; lognormal variance with pedigree 1.772, pedigree (1,1,5,5,1)
  burden from incineration of sludge from wastewater treatment of the short-term leachate (0-100a). uncertainty is calculated from uncertainties in waste composition and transfer coefficients in incinerator and uncertainty of waste decomposition and short-term leaching in sanitary landfill
  EcoSpold01Location=GLO
  properties: carbon content, fossil 0.628, dry mass 1 kg, heating value, net 19.03 MJ, wet mass 1 kg
  note on carbon content, fossil: Tab A.9, ecoinvent report 13_I: 0.1 kg C/kg lignite ash This dataset is an unweighted average of 20 organic substances (listed in Tab 88.1, ecoinvent v2.2 report 8, part II), being part of the top100 chemicals included in this database. The C-content has also been calculated as an unweighted average of the C content of the substances composing this dataset.
- electricity, high voltage: 1.35663e-6, 9.87741e-5, 0.000418188, 2.30943e-5, 6.93006e-6, 4.61088e-5, 3.10702e-5, 0.000145478 kWh (8 suppliers, which the file names only by identifier); sum of these 0.000771 kWh; lognormal variance with pedigree 0.542, pedigree (1,1,5,5,1)
  (same comment as for cement, unspecified)
- electricity, low voltage: 2.80508e-5, 5.55903e-5, 0.000534003, 9.52582e-6, 0.000190851, 1.73231e-6, 0.00013229, 3.89562e-5 kWh (8 suppliers, which the file names only by identifier); sum of these 0.000991 kWh; lognormal variance with pedigree 0.39, pedigree (5,5,5,5,5)
  EcoSpold01Location=CH
  burden from wastewater treatment of the short-term leachate (0-100a). Uncertainty calculated from unertainty of the waste composition of this waste, uncertainty in waste decomposition and short-term leaching in sanitary landfill
  Uncertainty: . Uncertainty calculated from unertainty of the waste composition of this waste, uncertainty in waste decomposition and short-term leaching in sanitary landfill
- heat, central or small-scale, other than natural gas: 0.00175253, 2.40711e-5 MJ (2 suppliers, which the file names only by identifier); sum of these 0.0017766 MJ; lognormal variance with pedigree 0.45, pedigree (5,5,5,5,5)
  (same comment as for electricity, low voltage)
  properties: heating value, net 1 MJ
- heat, district or industrial, natural gas: 0.000652401, 0.00176657, 2.90293e-5 MJ (3 suppliers, which the file names only by identifier); sum of these 0.002448 MJ; lognormal variance with pedigree 0.45, pedigree (5,5,5,5,5)
  (same comment as for aluminium sulfate, powder)
  properties: heating value, net 1 MJ
- heat, district or industrial, other than natural gas: 0.00438635, 0.000111619, 2.03211e-6 MJ (3 suppliers, which the file names only by identifier); sum of these 0.0045 MJ; lognormal variance with pedigree 0.292, pedigree (1,1,5,5,1)
  (same comment as for cement, unspecified)
  properties: heating value, net 1 MJ
- hydrochloric acid, without water, in 30% solution state: 2.2e-7 kg; lognormal variance with pedigree 0.652, pedigree (1,1,5,5,1)
  EcoSpold01Location=RER
  burden from incineration of sludge from wastewater treatment of the short-term leachate (0-100a). uncertainty is calculated from uncertainties in waste composition and transfer coefficients in incinerator and uncertainty of waste decomposition and short-term leaching in sanitary landfill
  properties: dry mass 1 kg, heating value, net 3.32 MJ, wet mass 1 kg
- iron (III) chloride, without water, in 40% solution state: 7.22e-6 kg; lognormal variance with pedigree 1.332, pedigree (1,1,5,5,1)
  (same comment as for cement, unspecified)
  properties: dry mass 1 kg, wet mass 1 kg
- iron sulfate: 5.2e-6 kg; lognormal variance with pedigree 1.47, pedigree (5,5,5,5,5)
  EcoSpold01Location=RER
  burden from wastewater treatment of the short-term leachate (0-100a). Uncertainty calculated from unertainty of the waste composition of this waste, uncertainty in waste decomposition and short-term leaching in sanitary landfill
  Uncertainty: . Uncertainty calculated from unertainty of the waste composition of this waste, uncertainty in waste decomposition and short-term leaching in sanitary landfill
  properties: dry mass 1 kg, wet mass 1 kg
- municipal waste incineration facility: 1.34e-12 unit; lognormal variance with pedigree 0.292, pedigree (1,1,5,5,1)
  EcoSpold01Location=CH
  Burden from incineration of sludge from wastewater treatment of the short-term leachate (0-100a).
- process-specific burdens, municipal waste incineration: 0.00384379, 0.00151621 kg (2 suppliers, which the file names only by identifier); sum of these 0.00536 kg; lognormal variance with pedigree 0.292, pedigree (1,1,5,5,1)
  Burden from incineration of sludge from wastewater treatment of the short-term leachate (0-100a).
  EcoSpold01Location=CH
- process-specific burdens, residual material landfill: 0.000184717, 0.000468283 kg (2 suppliers, which the file names only by identifier); sum of these 0.000653 kg; lognormal variance with pedigree 0.362, pedigree (1,1,5,5,1)
  (same comment as for cement, unspecified)
- process-specific burdens, sanitary landfill: 1 kg; lognormal variance with pedigree 0.042, pedigree (1,1,5,5,1)
  EcoSpold01Location=CH
  demands per kilogram waste. uncertainty is heeded in the module
- process-specific burdens, slag landfill: 0.0022446, 0.000885397 kg (2 suppliers, which the file names only by identifier); sum of these 0.00313 kg; lognormal variance with pedigree 0.372, pedigree (1,1,5,5,1)
  burden from incineration of sludge from wastewater treatment of the short-term leachate (0-100a). uncertainty is calculated from uncertainties in waste composition and transfer coefficients in incinerator and uncertainty of waste decomposition and short-term leaching in sanitary landfill
  EcoSpold01Location=CH
- quicklime, milled, packed: 3.16e-10 kg; lognormal variance with pedigree 1.392, pedigree (1,1,5,5,1)
  (same comment as for process-specific burdens, slag landfill)
  properties: dry mass 0.99 kg, water content 0.010101, wet mass 1 kg
- residual material landfill: 1.36e-12 unit; lognormal variance with pedigree 0.362, pedigree (1,1,5,5,1)
  (same comment as for process-specific burdens, slag landfill)
- sanitary landfill facility: 5.56e-10 unit; lognormal variance with pedigree 0.042, pedigree (1,1,5,5,1)
  EcoSpold01Location=CH
  demands per kilogram waste. uncertainty is heeded in the module
- sewer grid, 5E9l/year, 110 km: 5.45e-10 km; lognormal variance with pedigree 0.2106, pedigree (5,5,5,5,5)
  (same comment as for electricity, low voltage)
- slag landfill: 5.56e-12 unit; lognormal variance with pedigree 0.372, pedigree (1,1,5,5,1)
  (same comment as for cement, unspecified)
- sodium hydroxide, without water, in 50% solution state: 1.74e-9 kg; lognormal variance with pedigree 1.392, pedigree (1,1,5,5,1)
  burden from incineration of sludge from wastewater treatment of the short-term leachate (0-100a). uncertainty is calculated from uncertainties in waste composition and transfer coefficients in incinerator and uncertainty of waste decomposition and short-term leaching in sanitary landfill
  EcoSpold01Location=RER
  properties: dry mass 1 kg, heating value, net 3.03 MJ, wet mass 1 kg
- waste cement, hydrated: -0.000184717, -0.000468283 kg (2 suppliers, which the file names only by identifier); sum of these -0.000653 kg; lognormal variance with pedigree 0.332, pedigree (1,1,1,5,1)
  (same comment as for process-specific burdens, slag landfill)
  production volume
    Calculated from the production volume of lignite ash, 0% water in proportion to the respective output amounts.
  properties: dry mass 1 kg, wet mass 1 kg
- waste graphical paper: -4.09465e-6, -9.36524e-7, -2.59179e-7, -2.26629e-8, -9.13189e-8, -3.15294e-5, -1.69726e-6, -1.69041e-7 kg (8 suppliers, which the file names only by identifier); sum of these -3.88e-5 kg; lognormal variance with pedigree 0.2106, pedigree (5,5,5,5,5)
  (same comment as for electricity, low voltage)
  production volume
    (same comment as for waste cement, hydrated)
  properties: carbon content, non-fossil 0.454955, dry mass 0.888 kg, heating value, net 14.12 MJ, water content 0.126126, wet mass 1 kg
  note on heating value, net: Value taken from the general comment of the treatment dataset.
- waste plastic, mixture: -4.31618e-6, -2.18105e-8, -4.81214e-8, -3.02157e-5, -2.88391e-7, -3.67759e-6, -1.13112e-7, -1.19116e-7 kg (8 suppliers, which the file names only by identifier); sum of these -3.88e-5 kg; lognormal variance with pedigree 0.2106, pedigree (5,5,5,5,5)
  (same comment as for electricity, low voltage)
  production volume
    (same comment as for waste cement, hydrated)
  properties: carbon content, fossil 0.747344, dry mass 0.847 kg, heating value, net 30.79 MJ, water content 0.180638, wet mass 1 kg
  note on carbon content, fossil: Tab A.9, ecoinvent report 13_I: 0.1 kg C/kg lignite ash C content in 1 kg DM was calculated using data in Tab A.2, ecoinvent v2.2 report 13_I
- wastewater treatment facility, capacity 5E9l/year: 1.42e-11 unit; lognormal variance with pedigree 0.2106, pedigree (5,5,5,5,5)
  (same comment as for electricity, low voltage)

## Emissions to nature
- Aluminium III [air, non-urban air or from high stacks]: 2.88e-8 kg; lognormal variance with pedigree 1.862, pedigree (1,1,5,5,1)
  burden from direct release or incineration of landfill biogas. Uncertainty calculated from unertainty of the waste composition of this waste, uncertainty in waste decomposition and short-term leaching in sanitary landfill
- Aluminium III [air, urban air close to ground]: 1.69e-7 kg; lognormal variance with pedigree 0.812, pedigree (1,1,5,5,1)
  Emissions from short-term leachate treatment and incineration of resulting sludge. Uncertainty calculated depending on waste input and uncertainty of transfer coefficents in landfill, wastewater treatment and incineration model.
- Antimony ion [air, non-urban air or from high stacks]: 5.01e-11 kg; lognormal variance with pedigree 2.662, pedigree (1,1,5,5,1)
  (same comment as for Aluminium III)
- Antimony ion [air, urban air close to ground]: 9.87e-12 kg; lognormal variance with pedigree 2.222, pedigree (1,1,5,5,1)
  (same comment as for Aluminium III)
- Arsenic ion [air, non-urban air or from high stacks]: 5.79e-9 kg; lognormal variance with pedigree 2.032, pedigree (1,1,5,5,1)
  (same comment as for Aluminium III)
- Arsenic ion [air, urban air close to ground]: 1.16e-10 kg; lognormal variance with pedigree 1.522, pedigree (1,1,5,5,1)
  (same comment as for Aluminium III)
- Barium II [air, non-urban air or from high stacks]: 1.4e-8 kg; lognormal variance with pedigree 1.912, pedigree (1,1,5,5,1)
  (same comment as for Aluminium III)
- Barium II [air, urban air close to ground]: 5.28e-8 kg; lognormal variance with pedigree 0.912, pedigree (1,1,5,5,1)
  (same comment as for Aluminium III)
- Beryllium II [air, non-urban air or from high stacks]: 7.12e-12 kg; lognormal variance with pedigree 2.912, pedigree (1,1,5,5,1)
  (same comment as for Aluminium III)
- Beryllium II [air, urban air close to ground]: 1.4e-11 kg; lognormal variance with pedigree 1.862, pedigree (1,1,5,5,1)
  (same comment as for Aluminium III)
- Boron [air, urban air close to ground]: 4.18e-5 kg; lognormal variance with pedigree 0.662, pedigree (1,1,5,5,1)
  (same comment as for Aluminium III)
- Bromine [air, non-urban air or from high stacks]: 6.85e-8 kg; lognormal variance with pedigree 1.702, pedigree (1,1,5,5,1)
  (same comment as for Aluminium III)
- Cadmium II [air, non-urban air or from high stacks]: 3.22e-10 kg; lognormal variance with pedigree 2.412, pedigree (1,1,5,5,1)
  (same comment as for Aluminium III)
- Cadmium II [air, urban air close to ground]: 1.32e-12 kg; lognormal variance with pedigree 1.832, pedigree (1,1,5,5,1)
  (same comment as for Aluminium III)
- Calcium [air, non-urban air or from high stacks]: 3.19e-7 kg; lognormal variance with pedigree 1.602, pedigree (1,1,5,5,1)
  (same comment as for Aluminium III)
- Calcium [air, urban air close to ground]: 2.09e-7 kg; lognormal variance with pedigree 0.562, pedigree (1,1,5,5,1)
  (same comment as for Aluminium III)
- Carbon dioxide, fossil [air, non-urban air or from high stacks]: 0.0125 kg; lognormal variance with pedigree 0.352, pedigree (1,1,5,5,1)
  (same comment as for Aluminium III)
- Carbon dioxide, fossil [air, urban air close to ground]: 0.000418 kg; lognormal variance with pedigree 0.772, pedigree (1,1,5,5,1)
  (same comment as for Aluminium III)
- Carbon monoxide, fossil [air, non-urban air or from high stacks]: 7.1e-7 kg; lognormal variance with pedigree 1.002, pedigree (1,1,5,5,1)
  (same comment as for Aluminium III)
- Carbon monoxide, fossil [air, urban air close to ground]: 1.44e-6 kg; lognormal variance with pedigree 0.562, pedigree (1,1,5,5,1)
  (same comment as for Aluminium III)
- Chromium III [air, non-urban air or from high stacks]: 1.91e-11 kg; lognormal variance with pedigree 2.772, pedigree (1,1,5,5,1)
  (same comment as for Aluminium III)
- Chromium III [air, urban air close to ground]: 2.79e-15 kg; lognormal variance with pedigree 1.802, pedigree (1,1,5,5,1)
  (same comment as for Aluminium III)
- Cobalt II [air, non-urban air or from high stacks]: 5.91e-10 kg; lognormal variance with pedigree 2.332, pedigree (1,1,5,5,1)
  (same comment as for Aluminium III)
- Cobalt II [air, urban air close to ground]: 3.69e-14 kg; lognormal variance with pedigree 1.382, pedigree (1,1,5,5,1)
  (same comment as for Aluminium III)
- Copper ion [air, non-urban air or from high stacks]: 4.09e-12 kg; lognormal variance with pedigree 2.972, pedigree (1,1,5,5,1)
  (same comment as for Aluminium III)
- Copper ion [air, urban air close to ground]: 7.83e-14 kg; lognormal variance with pedigree 1.992, pedigree (1,1,5,5,1)
  (same comment as for Aluminium III)
- Iodine [air, non-urban air or from high stacks]: 2.89e-8 kg; lognormal variance with pedigree 1.822, pedigree (1,1,5,5,1)
  (same comment as for Aluminium III)
- Iron ion [air, non-urban air or from high stacks]: 9.09e-9 kg; lognormal variance with pedigree 2.002, pedigree (1,1,5,5,1)
  (same comment as for Aluminium III)
- Iron ion [air, urban air close to ground]: 7.43e-10 kg; lognormal variance with pedigree 0.782, pedigree (1,1,5,5,1)
  (same comment as for Aluminium III)
- Lead II [air, non-urban air or from high stacks]: 4.62e-12 kg; lognormal variance with pedigree 2.962, pedigree (1,1,5,5,1)
  (same comment as for Aluminium III)
- Lead II [air, urban air close to ground]: 4.58e-13 kg; lognormal variance with pedigree 1.982, pedigree (1,1,5,5,1)
  (same comment as for Aluminium III)
- Magnesium [air, non-urban air or from high stacks]: 2.27e-7 kg; lognormal variance with pedigree 1.572, pedigree (1,1,5,5,1)
  (same comment as for Aluminium III)
- Magnesium [air, urban air close to ground]: 1.23e-7 kg; lognormal variance with pedigree 0.552, pedigree (1,1,5,5,1)
  (same comment as for Aluminium III)
- Manganese II [air, non-urban air or from high stacks]: 2.83e-9 kg; lognormal variance with pedigree 2.122, pedigree (1,1,5,5,1)
  (same comment as for Aluminium III)
- Manganese II [air, urban air close to ground]: 3.04e-14 kg; lognormal variance with pedigree 1.232, pedigree (1,1,5,5,1)
  (same comment as for Aluminium III)
- Mercury II [air, non-urban air or from high stacks]: 1.37e-10 kg; lognormal variance with pedigree 2.522, pedigree (1,1,5,5,1)
  (same comment as for Aluminium III)
- Mercury II [air, urban air close to ground]: 5.8e-16 kg; lognormal variance with pedigree 2.462, pedigree (1,1,5,5,1)
  (same comment as for Aluminium III)
- Methane, fossil [air, non-urban air or from high stacks]: 0.00192 kg; lognormal variance with pedigree 0.392, pedigree (1,1,5,5,1)
  (same comment as for Aluminium III)
- Methane, fossil [air, urban air close to ground]: 8.52e-7 kg; lognormal variance with pedigree 0.782, pedigree (1,1,5,5,1)
  (same comment as for Aluminium III)
- Molybdenum VI [air, non-urban air or from high stacks]: 8.77e-11 kg; lognormal variance with pedigree 2.582, pedigree (1,1,5,5,1)
  (same comment as for Aluminium III)
- Molybdenum VI [air, urban air close to ground]: 3.45e-10 kg; lognormal variance with pedigree 1.532, pedigree (1,1,5,5,1)
  (same comment as for Aluminium III)
- NMVOC, non-methane volatile organic compounds [air, non-urban air or from high stacks]: 1.34e-8 kg; lognormal variance with pedigree 0.392, pedigree (1,1,5,5,1)
  (same comment as for Aluminium III)
- NMVOC, non-methane volatile organic compounds [air, urban air close to ground]: 3.72e-9 kg; lognormal variance with pedigree 0.942, pedigree (1,1,5,5,1)
  (same comment as for Aluminium III)
- Nickel II [air, non-urban air or from high stacks]: 1.06e-10 kg; lognormal variance with pedigree 2.552, pedigree (1,1,5,5,1)
  (same comment as for Aluminium III)
- Nickel II [air, urban air close to ground]: 7.18e-15 kg; lognormal variance with pedigree 1.582, pedigree (1,1,5,5,1)
  (same comment as for Aluminium III)
- Particulate Matter, < 2.5 um [air, non-urban air or from high stacks]: 2.38e-7 kg; lognormal variance with pedigree 0.662, pedigree (1,1,5,5,1)
  (same comment as for Aluminium III)
- Phosphorus [air, urban air close to ground]: 6.95e-10 kg; lognormal variance with pedigree 1.382, pedigree (1,1,5,5,1)
  (same comment as for Aluminium III)
- Potassium I [air, non-urban air or from high stacks]: 5.37e-8 kg; lognormal variance with pedigree 1.742, pedigree (1,1,5,5,1)
  (same comment as for Aluminium III)
- Scandium [air, non-urban air or from high stacks]: 5.57e-12 kg; lognormal variance with pedigree 2.942, pedigree (1,1,5,5,1)
  (same comment as for Aluminium III)
- Scandium [air, urban air close to ground]: 5.49e-12 kg; lognormal variance with pedigree 1.912, pedigree (1,1,5,5,1)
  (same comment as for Aluminium III)
- Selenium IV [air, non-urban air or from high stacks]: 1.85e-11 kg; lognormal variance with pedigree 2.792, pedigree (1,1,5,5,1)
  (same comment as for Aluminium III)
- Selenium IV [air, urban air close to ground]: 1.83e-16 kg; lognormal variance with pedigree 1.852, pedigree (1,1,5,5,1)
  (same comment as for Aluminium III)
- Silicon [air, non-urban air or from high stacks]: 2.94e-7 kg; lognormal variance with pedigree 1.672, pedigree (1,1,5,5,1)
  (same comment as for Aluminium III)
- Silicon [air, urban air close to ground]: 2.57e-6 kg; lognormal variance with pedigree 0.632, pedigree (1,1,5,5,1)
  (same comment as for Aluminium III)
- Sodium [air, non-urban air or from high stacks]: 4.56e-7 kg; lognormal variance with pedigree 1.472, pedigree (1,1,5,5,1)
  (same comment as for Aluminium III)
- Strontium [air, non-urban air or from high stacks]: 4.93e-10 kg; lognormal variance with pedigree 2.352, pedigree (1,1,5,5,1)
  (same comment as for Aluminium III)
- Strontium [air, urban air close to ground]: 9.72e-11 kg; lognormal variance with pedigree 1.322, pedigree (1,1,5,5,1)
  (same comment as for Aluminium III)
- Thallium I [air, non-urban air or from high stacks]: 1.38e-13 kg; lognormal variance with pedigree 3.422, pedigree (1,1,5,5,1)
  (same comment as for Aluminium III)
- Thallium I [air, urban air close to ground]: 2.72e-13 kg; lognormal variance with pedigree 2.382, pedigree (1,1,5,5,1)
  (same comment as for Aluminium III)
- Tin ion [air, non-urban air or from high stacks]: 1.17e-12 kg; lognormal variance with pedigree 3.142, pedigree (1,1,5,5,1)
  (same comment as for Aluminium III)
- Tin ion [air, urban air close to ground]: 3.6e-12 kg; lognormal variance with pedigree 2.102, pedigree (1,1,5,5,1)
  (same comment as for Aluminium III)
- Titanium ion [air, non-urban air or from high stacks]: 6.12e-10 kg; lognormal variance with pedigree 2.322, pedigree (1,1,5,5,1)
  (same comment as for Aluminium III)
- Titanium ion [air, urban air close to ground]: 1.21e-9 kg; lognormal variance with pedigree 1.272, pedigree (1,1,5,5,1)
  (same comment as for Aluminium III)
- Vanadium V [air, non-urban air or from high stacks]: 4.48e-10 kg; lognormal variance with pedigree 2.362, pedigree (1,1,5,5,1)
  (same comment as for Aluminium III)
- Vanadium V [air, urban air close to ground]: 8.82e-11 kg; lognormal variance with pedigree 1.332, pedigree (1,1,5,5,1)
  (same comment as for Aluminium III)
- Zinc II [air, non-urban air or from high stacks]: 1.4e-10 kg; lognormal variance with pedigree 2.512, pedigree (1,1,5,5,1)
  (same comment as for Aluminium III)
- Zinc II [air, urban air close to ground]: 7.11e-12 kg; lognormal variance with pedigree 1.482, pedigree (1,1,5,5,1)
  (same comment as for Aluminium III)
- Aluminium III [water, ground-, long-term]: 0.046 kg; lognormal variance with pedigree 0.242, pedigree (1,1,5,5,1)
  Emissions from long-term leachate (>100a) directly from MSW landfill and indirectly via incineration of treatement sludge from leachate treatement. Uncertainty calculated depending on waste input and uncertainty of long-term transfer coefficents in landfill.
- Aluminium III [water, surface water]: 6.91e-6 kg; lognormal variance with pedigree 0.782, pedigree (1,1,5,5,1)
  (same comment as for Aluminium III)
- Antimony ion [water, ground-, long-term]: 3.85e-6 kg; lognormal variance with pedigree 2.442, pedigree (1,1,5,5,1)
  (same comment as for Aluminium III)
- Antimony ion [water, surface water]: 1.36e-7 kg; lognormal variance with pedigree 1.572, pedigree (1,1,5,5,1)
  (same comment as for Aluminium III)
- Arsenic ion [water, ground-, long-term]: 4.56e-5 kg; lognormal variance with pedigree 1.102, pedigree (1,1,5,5,1)
  (same comment as for Aluminium III)
- Arsenic ion [water, surface water]: 3.64e-7 kg; lognormal variance with pedigree 1.492, pedigree (1,1,5,5,1)
  (same comment as for Aluminium III)
- BOD5, Biological Oxygen Demand [water, ground-, long-term]: 0.00631 kg; lognormal variance with pedigree 0.652, pedigree (1,1,5,5,1)
  (same comment as for Aluminium III)
- BOD5, Biological Oxygen Demand [water, surface water]: 2.89e-5 kg; lognormal variance with pedigree 0.772, pedigree (1,1,5,5,1)
  (same comment as for Aluminium III)
- Barium II [water, ground-, long-term]: 0.000971 kg; lognormal variance with pedigree 0.652, pedigree (1,1,5,5,1)
  (same comment as for Aluminium III)
- Barium II [water, surface water]: 3.37e-6 kg; lognormal variance with pedigree 0.902, pedigree (1,1,5,5,1)
  (same comment as for Aluminium III)
- Beryllium II [water, ground-, long-term]: 9.78e-6 kg; lognormal variance with pedigree 1.312, pedigree (1,1,5,5,1)
  (same comment as for Aluminium III)
- Beryllium II [water, surface water]: 1.45e-8 kg; lognormal variance with pedigree 1.832, pedigree (1,1,5,5,1)
  (same comment as for Aluminium III)
- Boron [water, ground-, long-term]: 0.00162 kg; lognormal variance with pedigree 0.492, pedigree (1,1,5,5,1)
  (same comment as for Aluminium III)
- Boron [water, surface water]: 0.000413 kg; lognormal variance with pedigree 0.642, pedigree (1,1,5,5,1)
  (same comment as for Aluminium III)
- Bromine [water, ground-, long-term]: 3.38e-5 kg; lognormal variance with pedigree 1.132, pedigree (1,1,5,5,1)
  (same comment as for Aluminium III)
- Bromine [water, surface water]: 4.89e-6 kg; lognormal variance with pedigree 1.232, pedigree (1,1,5,5,1)
  Emissions from short-term leachate treatment. Uncertainty calculated depending on waste input and uncertainty of transfer coefficents in landfill and wastewater treatment.
- COD, Chemical Oxygen Demand [water, ground-, long-term]: 0.0266 kg; lognormal variance with pedigree 0.652, pedigree (1,1,5,5,1)
  (same comment as for Aluminium III)
- COD, Chemical Oxygen Demand [water, surface water]: 9.18e-5 kg; lognormal variance with pedigree 0.772, pedigree (1,1,5,5,1)
  (same comment as for Aluminium III)
- Cadmium II [water, ground-, long-term]: 5.44e-6 kg; lognormal variance with pedigree 1.392, pedigree (1,1,5,5,1)
  (same comment as for Aluminium III)
- Cadmium II [water, surface water]: 2.45e-8 kg; lognormal variance with pedigree 1.772, pedigree (1,1,5,5,1)
  (same comment as for Aluminium III)
- Calcium II [water, ground-, long-term]: 0.195 kg; lognormal variance with pedigree 0.112, pedigree (1,1,5,5,1)
  (same comment as for Aluminium III)
- Calcium II [water, surface water]: 0.00115 kg; lognormal variance with pedigree 0.522, pedigree (1,1,5,5,1)
  (same comment as for Aluminium III)
- Chloride [water, surface water]: 4.66e-6 kg; lognormal variance with pedigree 1.362, pedigree (1,1,5,5,1)
  (same comment as for Bromine)
- Chromium III [water, surface water]: 1.2e-10 kg; lognormal variance with pedigree 1.722, pedigree (1,1,5,5,1)
  (same comment as for Aluminium III)
- Chromium VI [water, ground-, long-term]: 6.12e-7 kg; lognormal variance with pedigree 8.252, pedigree (1,1,5,5,1)
  (same comment as for Aluminium III)
- Chromium VI [water, surface water]: 4.01e-8 kg; lognormal variance with pedigree 1.682, pedigree (1,1,5,5,1)
  (same comment as for Aluminium III)
- Cobalt II [water, ground-, long-term]: 0.000146 kg; lognormal variance with pedigree 0.942, pedigree (1,1,5,5,1)
  (same comment as for Aluminium III)
- Cobalt II [water, surface water]: 1.2e-6 kg; lognormal variance with pedigree 1.262, pedigree (1,1,5,5,1)
  (same comment as for Aluminium III)
- Copper ion [water, ground-, long-term]: 5.85e-5 kg; lognormal variance with pedigree 1.072, pedigree (1,1,5,5,1)
  (same comment as for Aluminium III)
- Copper ion [water, surface water]: 3.72e-9 kg; lognormal variance with pedigree 1.912, pedigree (1,1,5,5,1)
  (same comment as for Aluminium III)
- DOC, Dissolved Organic Carbon [water, ground-, long-term]: 0.0244 kg; lognormal variance with pedigree 0.652, pedigree (1,1,5,5,1)
  (same comment as for Aluminium III)
- DOC, Dissolved Organic Carbon [water, surface water]: 2.23e-5 kg; lognormal variance with pedigree 0.772, pedigree (1,1,5,5,1)
  (same comment as for Aluminium III)
- Iodide [water, ground-, long-term]: 1.43e-5 kg; lognormal variance with pedigree 1.242, pedigree (1,1,5,5,1)
  (same comment as for Aluminium III)
- Iodide [water, surface water]: 2.06e-6 kg; lognormal variance with pedigree 1.342, pedigree (1,1,5,5,1)
  (same comment as for Bromine)
- Iron ion [water, ground-, long-term]: 0.00371 kg; lognormal variance with pedigree 1.992, pedigree (1,1,5,5,1)
  (same comment as for Aluminium III)
- Iron ion [water, surface water]: 1.85e-5 kg; lognormal variance with pedigree 0.932, pedigree (1,1,5,5,1)
  (same comment as for Aluminium III)
- Lead II [water, ground-, long-term]: 4.7e-5 kg; lognormal variance with pedigree 1.102, pedigree (1,1,5,5,1)
  (same comment as for Aluminium III)
- Lead II [water, surface water]: 1.52e-9 kg; lognormal variance with pedigree 1.922, pedigree (1,1,5,5,1)
  (same comment as for Aluminium III)
- Magnesium [water, ground-, long-term]: 0.0286 kg; lognormal variance with pedigree 0.282, pedigree (1,1,5,5,1)
  (same comment as for Aluminium III)
- Magnesium [water, surface water]: 0.000818 kg; lognormal variance with pedigree 0.522, pedigree (1,1,5,5,1)
  (same comment as for Aluminium III)
- Manganese II [water, ground-, long-term]: 0.000187 kg; lognormal variance with pedigree 0.882, pedigree (1,1,5,5,1)
  (same comment as for Aluminium III)
- Manganese II [water, surface water]: 5.75e-6 kg; lognormal variance with pedigree 1.082, pedigree (1,1,5,5,1)
  (same comment as for Aluminium III)
- Mercury II [water, ground-, long-term]: 9.95e-8 kg; lognormal variance with pedigree 1.902, pedigree (1,1,5,5,1)
  (same comment as for Aluminium III)
- Mercury II [water, surface water]: 1.08e-10 kg; lognormal variance with pedigree 2.402, pedigree (1,1,5,5,1)
  (same comment as for Aluminium III)
- Molybdenum VI [water, ground-, long-term]: 2.63e-5 kg; lognormal variance with pedigree 1.272, pedigree (1,1,5,5,1)
  (same comment as for Aluminium III)
- Molybdenum VI [water, surface water]: 2.07e-7 kg; lognormal variance with pedigree 1.502, pedigree (1,1,5,5,1)
  (same comment as for Aluminium III)
- Nickel II [water, ground-, long-term]: 0.000145 kg; lognormal variance with pedigree 0.952, pedigree (1,1,5,5,1)
  (same comment as for Aluminium III)
- Nickel II [water, surface water]: 2.57e-7 kg; lognormal variance with pedigree 1.472, pedigree (1,1,5,5,1)
  (same comment as for Aluminium III)
- Phosphate [water, ground-, long-term]: 8.18e-6 kg; lognormal variance with pedigree 7.062, pedigree (1,1,5,5,1)
  (same comment as for Aluminium III)
- Phosphate [water, surface water]: 1.18e-6 kg; lognormal variance with pedigree 1.342, pedigree (1,1,5,5,1)
  (same comment as for Aluminium III)
- Potassium I [water, ground-, long-term]: 0.00566 kg; lognormal variance with pedigree 0.472, pedigree (1,1,5,5,1)
  (same comment as for Aluminium III)
- Potassium I [water, surface water]: 0.000215 kg; lognormal variance with pedigree 0.692, pedigree (1,1,5,5,1)
  (same comment as for Bromine)
- Scandium [water, ground-, long-term]: 4.94e-6 kg; lognormal variance with pedigree 1.402, pedigree (1,1,5,5,1)
  (same comment as for Aluminium III)
- Scandium [water, surface water]: 1.2e-8 kg; lognormal variance with pedigree 1.862, pedigree (1,1,5,5,1)
  (same comment as for Aluminium III)
- Selenium IV [water, ground-, long-term]: 3.95e-6 kg; lognormal variance with pedigree 1.652, pedigree (1,1,5,5,1)
  (same comment as for Aluminium III)
- Selenium IV [water, surface water]: 4.93e-8 kg; lognormal variance with pedigree 1.712, pedigree (1,1,5,5,1)
  (same comment as for Aluminium III)
- Silicon [water, ground-, long-term]: 0.00908 kg; lognormal variance with pedigree 3.932, pedigree (1,1,5,5,1)
  (same comment as for Aluminium III)
- Silicon [water, surface water]: 7.07e-5 kg; lognormal variance with pedigree 0.622, pedigree (1,1,5,5,1)
  (same comment as for Aluminium III)
- Sodium I [water, ground-, long-term]: 0.00699 kg; lognormal variance with pedigree 0.432, pedigree (1,1,5,5,1)
  (same comment as for Aluminium III)
- Sodium I [water, surface water]: 0.00182 kg; lognormal variance with pedigree 0.492, pedigree (1,1,5,5,1)
  (same comment as for Bromine)
- Strontium [water, ground-, long-term]: 0.000678 kg; lognormal variance with pedigree 0.752, pedigree (1,1,5,5,1)
  (same comment as for Aluminium III)
- Strontium [water, surface water]: 1e-6 kg; lognormal variance with pedigree 1.272, pedigree (1,1,5,5,1)
  (same comment as for Aluminium III)
- Sulfate [water, surface water]: 4.47e-6 kg; lognormal variance with pedigree 1.362, pedigree (1,1,5,5,1)
  (same comment as for Bromine)
- TOC, Total Organic Carbon [water, ground-, long-term]: 0.0244 kg; lognormal variance with pedigree 0.652, pedigree (1,1,5,5,1)
  (same comment as for Aluminium III)
- TOC, Total Organic Carbon [water, surface water]: 2.32e-5 kg; lognormal variance with pedigree 0.772, pedigree (1,1,5,5,1)
  (same comment as for Aluminium III)
- Thallium I [water, ground-, long-term]: 1.9e-7 kg; lognormal variance with pedigree 1.822, pedigree (1,1,5,5,1)
  (same comment as for Aluminium III)
- Thallium I [water, surface water]: 2.8e-10 kg; lognormal variance with pedigree 2.342, pedigree (1,1,5,5,1)
  (same comment as for Aluminium III)
- Tin ion [water, ground-, long-term]: 1.58e-5 kg; lognormal variance with pedigree 1.252, pedigree (1,1,5,5,1)
  (same comment as for Aluminium III)
- Tin ion [water, surface water]: 1.95e-9 kg; lognormal variance with pedigree 2.062, pedigree (1,1,5,5,1)
  (same comment as for Aluminium III)
- Titanium ion [water, ground-, long-term]: 0.000978 kg; lognormal variance with pedigree 0.702, pedigree (1,1,5,5,1)
  (same comment as for Aluminium III)
- Titanium ion [water, surface water]: 1.24e-6 kg; lognormal variance with pedigree 1.242, pedigree (1,1,5,5,1)
  (same comment as for Aluminium III)
- Vanadium V [water, ground-, long-term]: 9.85e-5 kg; lognormal variance with pedigree 1.222, pedigree (1,1,5,5,1)
  (same comment as for Aluminium III)
- Vanadium V [water, surface water]: 9.09e-7 kg; lognormal variance with pedigree 1.282, pedigree (1,1,5,5,1)
  (same comment as for Aluminium III)
- Zinc II [water, ground-, long-term]: 0.000219 kg; lognormal variance with pedigree 0.882, pedigree (1,1,5,5,1)
  (same comment as for Aluminium III)
- Zinc II [water, surface water]: 1.95e-7 kg; lognormal variance with pedigree 1.412, pedigree (1,1,5,5,1)
  (same comment as for Aluminium III)

## Sampling procedure
Landfill model based on observed leachate concentrations in literature. Extrapolated to 60'000 years heeding chemical characteristics. Initial waste composition from various literature sources.

## Extrapolations
This dataset has been copied from an original dataset covering the geography CH. The uncertainty has been adjusted accordingly.

## Review by Niels Jungbluth 2003-07-21
Passed. Calculation for standard deviation 95 of, i.e., infrastructure,
land occupation, transport services or other services can differ from
standard Pedigree approach used in this project and figures obtained by
this procedure.

## Review by Emilia Moreno Ruiz 2015-10-12
PV adjusted
