# treatment of wood ash mixture, pure, sanitary landfill

Dataset: EcoSpold 2, unit process
Geography: RoW
Time period: 1994-01-01 to 2022-12-31
Technology level: current
Classification: EcoSpold01Categories: waste management/sanitary landfill
Classification: ISIC rev.4 ecoinvent: 3821:Treatment and disposal of non-hazardous waste
Tags: Treatment; ConvertedDataset
Scenario: Business-as-Usual
System model: Allocation at the point of substitution
Generated by: Gabor Doka (obsolete)
Published in: Doka G. 2007
Database: ecoinvent
isCopyrightProtected: true

## General comment
Inventoried waste contains 100% wood ash pure; .
waste composition (wet, in ppm): H2O n.a.; O 445010; H n.a.; C 12000; S 9200; N n.a.; P 9800; B n.a.; Cl 3200; Br n.a.; F n.a.; I n.a.; Ag n.a.; As 6.7; Ba n.a.; Cd 14.2; Co 18; Cr 194.9; Cu 163.2; Hg 0.1; Mn 19956; Mo 3.7; Ni 55.2; Pb 65; Sb n.a.; Se n.a.; Sn n.a.; V 39.5; Zn 1662; Be n.a.; Sc n.a.; Sr n.a.; Ti 1383; Tl n.a.; W n.a.; Si 82600; Fe 22833; Ca 284400; Al 20800; K 54500; Mg 32100; Na n.a.;
Share of carbon in waste that is biogenic 100%.
Overall degradability of waste during 100 years: 5%.
[This dataset was already contained in the ecoinvent database version 2. It was not individually updated during the transfer to ecoinvent version 3. Life Cycle Impact Assessment results may still have changed, as they are affected by changes in the supply chain, i.e. in other datasets. This dataset was generated following the ecoinvent quality guidelines for version 2. It may have been subject to central changes described in the ecoinvent version 3 change report (http://www.ecoinvent.org/database/ecoinvent-version-3/reports-of-changes/), and the results of the central updates were reviewed extensively. The changes added e.g. consistent water flows and other information throughout the database. The documentation of this dataset can be found in the ecoinvent reports of version 2, which are still available via the ecoinvent website. The change report linked above covers all central changes that were made during the conversion process.]

## Included activities end
Waste-specific short-term emissions to air via landfill gas incineration and landfill leachate. Burdens from treatment of short-term leachate (0-100a) in wastewater treatment plant (including WWTP sludge disposal in municipal incinerator). Long-term emissions from landfill to groundwater (after base lining failure).

## Geography
Technology encountered in Switzerland in 2000. Landfill includes base seal, leachate collection system, treatment of leachate in municipal wastewater treatment plant.

## Technology
Swiss municipal sanitary landfill for biogenic or untreated municipal waste ('reactive organic landfill'). Landfill gas and leachate collection system. Recultivation and monitoring for 150 years after closure.

## Reference product
- wood ash mixture, pure: -1 kg; name wood_ash_RP; By-product classification Waste; CPC 3928: Sawdust and wood waste and scrap
  EcoSpold01Location=CH
  production volume 1.19653e9 kg
    Based on firewood and charcoal usage in developing nations of 1300 Mio m3 (UCS 2011), generic wood fuel ash content, and a generic global rate of 21.7w% of MSW going to incineration (Pike + UNSD 2012). Very uncertain figure, as firewood using nations tend to have little MSWI, so a global average calculation might be misleading.
    It is estimated that the remaining 78.3% goes to landfill (50%) and to landfarming (50%).
  property heating value, net 0 MJ
    Non combustible products are assumed to have an LHV equal to zero (0).
  property price 0 EUR2005
    Waste products are assigned a price of zero as they are assumed to require further treatment.
  properties: carbon allocation 0.012 kg, carbon content 0.012, carbon content, fossil 0, carbon content, non-fossil 0.012, dry mass 1 kg, water content 0, water in wet mass 0 kg, wet mass 1 kg

## Inputs from technosphere
- aluminium sulfate, powder: 3.51e-5 kg; lognormal variance with pedigree 1.06, pedigree (5,5,5,5,5)
  EcoSpold01Location=RER
  burden from wastewater treatment of the short-term leachate (0-100a). Uncertainty calculated from unertainty of the waste composition of this waste, uncertainty in waste decomposition and short-term leaching in sanitary landfill
  Uncertainty: . Uncertainty calculated from unertainty of the waste composition of this waste, uncertainty in waste decomposition and short-term leaching in sanitary landfill
  properties: dry mass 1 kg, wet mass 1 kg
- cement, unspecified: 7.72611e-5, 2.89879e-7, 1.89609e-7, 7.672e-6, 2.02014e-6, 2.40815e-7, 9.54006e-8, 1.23108e-6 kg (8 suppliers, which the file names only by identifier); sum of these 8.9e-5 kg; lognormal variance with pedigree 0.222, pedigree (1,1,5,5,1)
  burden from incineration of sludge from wastewater treatment of the short-term leachate (0-100a). uncertainty is calculated from uncertainties in waste composition and transfer coefficients in incinerator and uncertainty of waste decomposition and short-term leaching in sanitary landfill
  EcoSpold01Location=CH
  properties: dry mass 1 kg, wet mass 1 kg
- chemical, inorganic: 2.23e-8 kg; lognormal variance with pedigree 0.392, pedigree (1,1,5,5,1)
  burden from incineration of sludge from wastewater treatment of the short-term leachate (0-100a). uncertainty is calculated from uncertainties in waste composition and transfer coefficients in incinerator and uncertainty of waste decomposition and short-term leaching in sanitary landfill
  EcoSpold01Location=GLO
  properties: carbon content, fossil 0.003, dry mass 1 kg, wet mass 1 kg
  note on carbon content, fossil: This dataset is an unweighted average of 20 inorganic substances (listed in Tab 88.1, ecoinvent v2.2 report 8, part II), being part of the top100 chemicals included in this database. The C-content has also been calculated as an unweighted average of the C content of the substances composing this dataset.
- chemical, organic: 1.92e-7 kg; lognormal variance with pedigree 1.652, pedigree (1,1,5,5,1)
  EcoSpold01Location=GLO
  burden from incineration of sludge from wastewater treatment of the short-term leachate (0-100a). uncertainty is calculated from uncertainties in waste composition and transfer coefficients in incinerator and uncertainty of waste decomposition and short-term leaching in sanitary landfill
  properties: carbon content, fossil 0.628, dry mass 1 kg, heating value, net 19.03 MJ, wet mass 1 kg
  note on carbon content, fossil: This dataset is an unweighted average of 20 organic substances (listed in Tab 88.1, ecoinvent v2.2 report 8, part II), being part of the top100 chemicals included in this database. The C-content has also been calculated as an unweighted average of the C content of the substances composing this dataset.
- electricity, high voltage: 1.06431e-6, 0.000328077, 1.8118e-5, 5.43677e-6, 3.61733e-5, 0.000114131 kWh (6 suppliers, which the file names only by identifier); sum of these 0.000503 kWh; lognormal variance with pedigree 0.392, pedigree (1,1,5,5,1)
  (same comment as for cement, unspecified)
- electricity, low voltage: 2.1592e-5, 4.27902e-5, 0.000411045, 7.33244e-6, 0.000146907, 1.33343e-6 kWh (6 suppliers, which the file names only by identifier); sum of these 0.000631 kWh; lognormal variance with pedigree 0.31, pedigree (5,5,5,5,5)
  EcoSpold01Location=CH
  burden from wastewater treatment of the short-term leachate (0-100a). Uncertainty calculated from unertainty of the waste composition of this waste, uncertainty in waste decomposition and short-term leaching in sanitary landfill
  Uncertainty: . Uncertainty calculated from unertainty of the waste composition of this waste, uncertainty in waste decomposition and short-term leaching in sanitary landfill
- heat, central or small-scale, other than natural gas: 0.0011844 MJ; lognormal variance with pedigree 0.34, pedigree (5,5,5,5,5)
  (same comment as for electricity, low voltage)
  properties: heating value, net 1 MJ
- heat, district or industrial, natural gas: 0.00160562, 2.63844e-5 MJ (2 suppliers, which the file names only by identifier); sum of these 0.001632 MJ; lognormal variance with pedigree 0.34, pedigree (5,5,5,5,5)
  burden from wastewater treatment of the short-term leachate (0-100a). Uncertainty calculated from unertainty of the waste composition of this waste, uncertainty in waste decomposition and short-term leaching in sanitary landfill
  EcoSpold01Location=RER
  Uncertainty: . Uncertainty calculated from unertainty of the waste composition of this waste, uncertainty in waste decomposition and short-term leaching in sanitary landfill
  properties: heating value, net 1 MJ
- heat, district or industrial, other than natural gas: 0.00292864, 1.35679e-6 MJ (2 suppliers, which the file names only by identifier); sum of these 0.00293 MJ; lognormal variance with pedigree 0.202, pedigree (1,1,5,5,1)
  (same comment as for cement, unspecified)
  properties: heating value, net 1 MJ
- hydrochloric acid, without water, in 30% solution state: 1.34e-8 kg; lognormal variance with pedigree 0.392, pedigree (1,1,5,5,1)
  EcoSpold01Location=RER
  burden from incineration of sludge from wastewater treatment of the short-term leachate (0-100a). uncertainty is calculated from uncertainties in waste composition and transfer coefficients in incinerator and uncertainty of waste decomposition and short-term leaching in sanitary landfill
  properties: dry mass 1 kg, heating value, net 3.32 MJ, wet mass 1 kg
- iron (III) chloride, without water, in 40% solution state: 0.000181 kg; lognormal variance with pedigree 0.932, pedigree (1,1,5,5,1)
  (same comment as for cement, unspecified)
  properties: dry mass 1 kg, wet mass 1 kg
- iron sulfate: 0.00013 kg; lognormal variance with pedigree 1.06, pedigree (5,5,5,5,5)
  (same comment as for heat, district or industrial, natural gas)
  properties: dry mass 1 kg, wet mass 1 kg
- municipal waste incineration facility: 8.74e-13 unit; lognormal variance with pedigree 0.202, pedigree (1,1,5,5,1)
  EcoSpold01Location=CH
  Burden from incineration of sludge from wastewater treatment of the short-term leachate (0-100a).
- process-specific burdens, municipal waste incineration: 0.0035 kg; lognormal variance with pedigree 0.202, pedigree (1,1,5,5,1)
  Burden from incineration of sludge from wastewater treatment of the short-term leachate (0-100a).
  EcoSpold01Location=CH
- process-specific burdens, residual material landfill: 0.000222 kg; lognormal variance with pedigree 0.212, pedigree (1,1,5,5,1)
  (same comment as for cement, unspecified)
- process-specific burdens, sanitary landfill: 1 kg; lognormal variance with pedigree 0.042, pedigree (1,1,5,5,1)
  EcoSpold01Location=CH
  demands per kilogram waste. uncertainty is heeded in the module
- process-specific burdens, slag landfill: 0.00163 kg; lognormal variance with pedigree 0.212, pedigree (1,1,5,5,1)
  EcoSpold01Location=CH
  burden from incineration of sludge from wastewater treatment of the short-term leachate (0-100a). uncertainty is calculated from uncertainties in waste composition and transfer coefficients in incinerator and uncertainty of waste decomposition and short-term leaching in sanitary landfill
- quicklime, milled, packed: 7.9e-9 kg; lognormal variance with pedigree 0.982, pedigree (1,1,5,5,1)
  (same comment as for cement, unspecified)
  properties: dry mass 0.99 kg, water content 0.010101, wet mass 1 kg
- residual material landfill: 4.63e-13 unit; lognormal variance with pedigree 0.212, pedigree (1,1,5,5,1)
  (same comment as for process-specific burdens, slag landfill)
- sanitary landfill facility: 5.56e-10 unit; lognormal variance with pedigree 0.042, pedigree (1,1,5,5,1)
  demands per kilogram waste. uncertainty is heeded in the module
  EcoSpold01Location=CH
- sewer grid, 5E9l/year, 110 km: 5.45e-10 km; lognormal variance with pedigree 0.2106, pedigree (5,5,5,5,5)
  (same comment as for electricity, low voltage)
- slag landfill: 2.9e-12 unit; lognormal variance with pedigree 0.212, pedigree (1,1,5,5,1)
  (same comment as for cement, unspecified)
- sodium hydroxide, without water, in 50% solution state: 4.36e-8 kg; lognormal variance with pedigree 0.982, pedigree (1,1,5,5,1)
  burden from incineration of sludge from wastewater treatment of the short-term leachate (0-100a). uncertainty is calculated from uncertainties in waste composition and transfer coefficients in incinerator and uncertainty of waste decomposition and short-term leaching in sanitary landfill
  EcoSpold01Location=RER
  properties: dry mass 1 kg, heating value, net 3.03 MJ, wet mass 1 kg
- waste cement, hydrated: -0.000222 kg; name waste_cement_ByP; lognormal variance with pedigree 0.182, pedigree (1,1,1,5,1)
  (same comment as for process-specific burdens, slag landfill)
  production volume
    Calculated from the production volume of wood ash mixture, pure, 0% water in proportion to the respective output amounts.
  properties: dry mass 1 kg, wet mass 1 kg
- waste graphical paper: -1.04702e-6, -2.89758e-7, -2.53367e-8, -1.02093e-7, -3.52493e-5, -1.89751e-6, -1.88985e-7 kg (7 suppliers, which the file names only by identifier); sum of these -3.88e-5 kg; lognormal variance with pedigree 0.2106, pedigree (5,5,5,5,5)
  burden from wastewater treatment of the short-term leachate (0-100a). Uncertainty calculated from unertainty of the waste composition of this waste, uncertainty in waste decomposition and short-term leaching in sanitary landfill
  EcoSpold01Location=CH
  Uncertainty: . Uncertainty calculated from unertainty of the waste composition of this waste, uncertainty in waste decomposition and short-term leaching in sanitary landfill
  production volume
    (same comment as for waste cement, hydrated)
  properties: carbon content, non-fossil 0.454955, dry mass 0.888 kg, heating value, net 14.12 MJ, water content 0.126126, wet mass 1 kg
  note on heating value, net: Value taken from the general comment of the treatment dataset.
- waste plastic, mixture: -4.76812e-6, -2.40943e-8, -5.31601e-8, -3.33795e-5, -3.18588e-7, -1.24955e-7, -1.31588e-7 kg (7 suppliers, which the file names only by identifier); sum of these -3.88e-5 kg; lognormal variance with pedigree 0.2106, pedigree (5,5,5,5,5)
  (same comment as for waste graphical paper)
  production volume
    (same comment as for waste cement, hydrated)
  properties: carbon content, fossil 0.747344, dry mass 0.847 kg, heating value, net 30.79 MJ, water content 0.180638, wet mass 1 kg
  note on carbon content, fossil: C content in 1 kg DM was calculated using data in Tab A.2, ecoinvent v2.2 report 13_I
- wastewater treatment facility, capacity 5E9l/year: 1.42e-11 unit; lognormal variance with pedigree 0.2106, pedigree (5,5,5,5,5)
  (same comment as for waste graphical paper)

## Emissions to nature
- Aluminium III [air, non-urban air or from high stacks]: 1.3e-8 kg; lognormal variance with pedigree 1.942, pedigree (1,1,5,5,1)
  burden from direct release or incineration of landfill biogas. Uncertainty calculated from unertainty of the waste composition of this waste, uncertainty in waste decomposition and short-term leaching in sanitary landfill
- Aluminium III [air, urban air close to ground]: 8.5e-8 kg; lognormal variance with pedigree 0.782, pedigree (1,1,5,5,1)
  Emissions from short-term leachate treatment and incineration of resulting sludge. Uncertainty calculated depending on waste input and uncertainty of transfer coefficents in landfill, wastewater treatment and incineration model.
- Arsenic ion [air, non-urban air or from high stacks]: 8.44e-10 kg; lognormal variance with pedigree 2.282, pedigree (1,1,5,5,1)
  (same comment as for Aluminium III)
- Arsenic ion [air, urban air close to ground]: 1.69e-11 kg; lognormal variance with pedigree 1.782, pedigree (1,1,5,5,1)
  (same comment as for Aluminium III)
- Cadmium II [air, non-urban air or from high stacks]: 8.33e-10 kg; lognormal variance with pedigree 2.292, pedigree (1,1,5,5,1)
  (same comment as for Aluminium III)
- Cadmium II [air, urban air close to ground]: 3.42e-12 kg; lognormal variance with pedigree 1.692, pedigree (1,1,5,5,1)
  (same comment as for Aluminium III)
- Calcium [air, non-urban air or from high stacks]: 4.63e-7 kg; lognormal variance with pedigree 1.582, pedigree (1,1,5,5,1)
  (same comment as for Aluminium III)
- Calcium [air, urban air close to ground]: 3.03e-7 kg; lognormal variance with pedigree 0.532, pedigree (1,1,5,5,1)
  (same comment as for Aluminium III)
- Carbon dioxide, non-fossil [air, non-urban air or from high stacks]: 0.0015 kg; lognormal variance with pedigree 0.582, pedigree (1,1,5,5,1)
  (same comment as for Aluminium III)
- Carbon dioxide, non-fossil [air, urban air close to ground]: 5.02e-5 kg; lognormal variance with pedigree 0.992, pedigree (1,1,5,5,1)
  (same comment as for Aluminium III)
- Carbon monoxide, non-fossil [air, non-urban air or from high stacks]: 8.52e-8 kg; lognormal variance with pedigree 1.222, pedigree (1,1,5,5,1)
  (same comment as for Aluminium III)
- Carbon monoxide, non-fossil [air, urban air close to ground]: 8.09e-7 kg; lognormal variance with pedigree 0.472, pedigree (1,1,5,5,1)
  (same comment as for Aluminium III)
- Chromium III [air, non-urban air or from high stacks]: 2.78e-11 kg; lognormal variance with pedigree 2.722, pedigree (1,1,5,5,1)
  (same comment as for Aluminium III)
- Chromium III [air, urban air close to ground]: 4.05e-15 kg; lognormal variance with pedigree 1.752, pedigree (1,1,5,5,1)
  (same comment as for Aluminium III)
- Cobalt II [air, non-urban air or from high stacks]: 7.23e-11 kg; lognormal variance with pedigree 2.612, pedigree (1,1,5,5,1)
  (same comment as for Aluminium III)
- Cobalt II [air, urban air close to ground]: 4.52e-15 kg; lognormal variance with pedigree 1.662, pedigree (1,1,5,5,1)
  (same comment as for Aluminium III)
- Copper ion [air, non-urban air or from high stacks]: 1.14e-11 kg; lognormal variance with pedigree 2.832, pedigree (1,1,5,5,1)
  (same comment as for Aluminium III)
- Copper ion [air, urban air close to ground]: 2.18e-13 kg; lognormal variance with pedigree 1.852, pedigree (1,1,5,5,1)
  (same comment as for Aluminium III)
- Hydrochloric acid [air, non-urban air or from high stacks]: 5.81e-6 kg; lognormal variance with pedigree 1.132, pedigree (1,1,5,5,1)
  (same comment as for Aluminium III)
- Iron ion [air, non-urban air or from high stacks]: 3.92e-9 kg; lognormal variance with pedigree 2.102, pedigree (1,1,5,5,1)
  (same comment as for Aluminium III)
- Iron ion [air, urban air close to ground]: 3.89e-9 kg; lognormal variance with pedigree 0.912, pedigree (1,1,5,5,1)
  (same comment as for Aluminium III)
- Lead II [air, non-urban air or from high stacks]: 6.38e-12 kg; lognormal variance with pedigree 2.912, pedigree (1,1,5,5,1)
  (same comment as for Aluminium III)
- Lead II [air, urban air close to ground]: 6.33e-13 kg; lognormal variance with pedigree 1.942, pedigree (1,1,5,5,1)
  (same comment as for Aluminium III)
- Magnesium [air, non-urban air or from high stacks]: 2.48e-7 kg; lognormal variance with pedigree 1.562, pedigree (1,1,5,5,1)
  (same comment as for Aluminium III)
- Magnesium [air, urban air close to ground]: 1.34e-7 kg; lognormal variance with pedigree 0.542, pedigree (1,1,5,5,1)
  (same comment as for Aluminium III)
- Manganese II [air, non-urban air or from high stacks]: 2.86e-7 kg; lognormal variance with pedigree 1.542, pedigree (1,1,5,5,1)
  (same comment as for Aluminium III)
- Manganese II [air, urban air close to ground]: 3.06e-12 kg; lognormal variance with pedigree 0.642, pedigree (1,1,5,5,1)
  (same comment as for Aluminium III)
- Mercury II [air, non-urban air or from high stacks]: 1.37e-10 kg; lognormal variance with pedigree 2.522, pedigree (1,1,5,5,1)
  (same comment as for Aluminium III)
- Mercury II [air, urban air close to ground]: 5.8e-16 kg; lognormal variance with pedigree 2.462, pedigree (1,1,5,5,1)
  (same comment as for Aluminium III)
- Methane, non-fossil [air, non-urban air or from high stacks]: 0.00023 kg; lognormal variance with pedigree 0.622, pedigree (1,1,5,5,1)
  (same comment as for Aluminium III)
- Methane, non-fossil [air, urban air close to ground]: 1.2e-7 kg; lognormal variance with pedigree 0.842, pedigree (1,1,5,5,1)
  (same comment as for Aluminium III)
- Molybdenum VI [air, non-urban air or from high stacks]: 4.88e-12 kg; lognormal variance with pedigree 2.972, pedigree (1,1,5,5,1)
  (same comment as for Aluminium III)
- Molybdenum VI [air, urban air close to ground]: 1.92e-11 kg; lognormal variance with pedigree 1.922, pedigree (1,1,5,5,1)
  (same comment as for Aluminium III)
- NMVOC, non-methane volatile organic compounds [air, non-urban air or from high stacks]: 1.61e-9 kg; lognormal variance with pedigree 0.622, pedigree (1,1,5,5,1)
  (same comment as for Aluminium III)
- NMVOC, non-methane volatile organic compounds [air, urban air close to ground]: 4.46e-10 kg; lognormal variance with pedigree 1.162, pedigree (1,1,5,5,1)
  (same comment as for Aluminium III)
- Nickel II [air, non-urban air or from high stacks]: 4.01e-11 kg; lognormal variance with pedigree 2.682, pedigree (1,1,5,5,1)
  (same comment as for Aluminium III)
- Nickel II [air, urban air close to ground]: 2.73e-15 kg; lognormal variance with pedigree 1.712, pedigree (1,1,5,5,1)
  (same comment as for Aluminium III)
- Particulate Matter, < 2.5 um [air, non-urban air or from high stacks]: 2.86e-8 kg; lognormal variance with pedigree 0.882, pedigree (1,1,5,5,1)
  (same comment as for Aluminium III)
- Phosphorus [air, urban air close to ground]: 1.74e-8 kg; lognormal variance with pedigree 0.972, pedigree (1,1,5,5,1)
  (same comment as for Aluminium III)
- Potassium I [air, non-urban air or from high stacks]: 4.98e-7 kg; lognormal variance with pedigree 1.492, pedigree (1,1,5,5,1)
  (same comment as for Aluminium III)
- Silicon [air, non-urban air or from high stacks]: 5.16e-8 kg; lognormal variance with pedigree 1.802, pedigree (1,1,5,5,1)
  (same comment as for Aluminium III)
- Silicon [air, urban air close to ground]: 4.52e-7 kg; lognormal variance with pedigree 0.752, pedigree (1,1,5,5,1)
  (same comment as for Aluminium III)
- Sulfur dioxide [air, non-urban air or from high stacks]: 6e-5 kg; lognormal variance with pedigree 0.922, pedigree (1,1,5,5,1)
  (same comment as for Aluminium III)
- Titanium ion [air, non-urban air or from high stacks]: 8.64e-10 kg; lognormal variance with pedigree 2.282, pedigree (1,1,5,5,1)
  (same comment as for Aluminium III)
- Titanium ion [air, urban air close to ground]: 1.7e-9 kg; lognormal variance with pedigree 1.232, pedigree (1,1,5,5,1)
  (same comment as for Aluminium III)
- Vanadium V [air, non-urban air or from high stacks]: 5.21e-11 kg; lognormal variance with pedigree 2.652, pedigree (1,1,5,5,1)
  (same comment as for Aluminium III)
- Vanadium V [air, urban air close to ground]: 1.03e-11 kg; lognormal variance with pedigree 1.622, pedigree (1,1,5,5,1)
  (same comment as for Aluminium III)
- Zinc II [air, non-urban air or from high stacks]: 8.75e-10 kg; lognormal variance with pedigree 2.282, pedigree (1,1,5,5,1)
  (same comment as for Aluminium III)
- Zinc II [air, urban air close to ground]: 4.44e-11 kg; lognormal variance with pedigree 1.242, pedigree (1,1,5,5,1)
  (same comment as for Aluminium III)
- Aluminium III [water, ground-, long-term]: 0.0208 kg; lognormal variance with pedigree 0.322, pedigree (1,1,5,5,1)
  Emissions from long-term leachate (>100a) directly from MSW landfill and indirectly via incineration of treatement sludge from leachate treatement. Uncertainty calculated depending on waste input and uncertainty of long-term transfer coefficents in landfill.
- Aluminium III [water, surface water]: 3.12e-6 kg; lognormal variance with pedigree 0.862, pedigree (1,1,5,5,1)
  (same comment as for Aluminium III)
- Arsenic ion [water, ground-, long-term]: 6.65e-6 kg; lognormal variance with pedigree 1.362, pedigree (1,1,5,5,1)
  (same comment as for Aluminium III)
- Arsenic ion [water, surface water]: 5.3e-8 kg; lognormal variance with pedigree 1.742, pedigree (1,1,5,5,1)
  (same comment as for Aluminium III)
- BOD5, Biological Oxygen Demand [water, ground-, long-term]: 0.000757 kg; lognormal variance with pedigree 0.872, pedigree (1,1,5,5,1)
  (same comment as for Aluminium III)
- BOD5, Biological Oxygen Demand [water, surface water]: 3.47e-6 kg; lognormal variance with pedigree 1.002, pedigree (1,1,5,5,1)
  (same comment as for Aluminium III)
- COD, Chemical Oxygen Demand [water, ground-, long-term]: 0.0032 kg; lognormal variance with pedigree 0.872, pedigree (1,1,5,5,1)
  (same comment as for Aluminium III)
- COD, Chemical Oxygen Demand [water, surface water]: 1.1e-5 kg; lognormal variance with pedigree 0.992, pedigree (1,1,5,5,1)
  (same comment as for Aluminium III)
- Cadmium II [water, ground-, long-term]: 1.41e-5 kg; lognormal variance with pedigree 1.262, pedigree (1,1,5,5,1)
  (same comment as for Aluminium III)
- Cadmium II [water, surface water]: 6.34e-8 kg; lognormal variance with pedigree 1.642, pedigree (1,1,5,5,1)
  (same comment as for Aluminium III)
- Calcium II [water, ground-, long-term]: 0.283 kg; lognormal variance with pedigree 0.082, pedigree (1,1,5,5,1)
  (same comment as for Aluminium III)
- Calcium II [water, surface water]: 0.00167 kg; lognormal variance with pedigree 0.502, pedigree (1,1,5,5,1)
  (same comment as for Aluminium III)
- Chloride [water, ground-, long-term]: 0.00279 kg; lognormal variance with pedigree 0.552, pedigree (1,1,5,5,1)
  (same comment as for Aluminium III)
- Chloride [water, surface water]: 0.000519 kg; lognormal variance with pedigree 0.492, pedigree (1,1,5,5,1)
  Emissions from short-term leachate treatment. Uncertainty calculated depending on waste input and uncertainty of transfer coefficents in landfill and wastewater treatment.
- Chromium III [water, surface water]: 1.74e-10 kg; lognormal variance with pedigree 1.672, pedigree (1,1,5,5,1)
  (same comment as for Aluminium III)
- Chromium VI [water, ground-, long-term]: 8.88e-7 kg; lognormal variance with pedigree 8.192, pedigree (1,1,5,5,1)
  (same comment as for Aluminium III)
- Chromium VI [water, surface water]: 5.82e-8 kg; lognormal variance with pedigree 1.642, pedigree (1,1,5,5,1)
  (same comment as for Aluminium III)
- Cobalt II [water, ground-, long-term]: 1.78e-5 kg; lognormal variance with pedigree 1.222, pedigree (1,1,5,5,1)
  (same comment as for Aluminium III)
- Cobalt II [water, surface water]: 1.47e-7 kg; lognormal variance with pedigree 1.542, pedigree (1,1,5,5,1)
  (same comment as for Aluminium III)
- Copper ion [water, ground-, long-term]: 0.000163 kg; lognormal variance with pedigree 0.942, pedigree (1,1,5,5,1)
  (same comment as for Aluminium III)
- Copper ion [water, surface water]: 1.04e-8 kg; lognormal variance with pedigree 1.772, pedigree (1,1,5,5,1)
  (same comment as for Aluminium III)
- DOC, Dissolved Organic Carbon [water, ground-, long-term]: 0.00292 kg; lognormal variance with pedigree 0.872, pedigree (1,1,5,5,1)
  (same comment as for Aluminium III)
- DOC, Dissolved Organic Carbon [water, surface water]: 2.68e-6 kg; lognormal variance with pedigree 0.992, pedigree (1,1,5,5,1)
  (same comment as for Aluminium III)
- Hydrogen sulfide [water, ground-, long-term]: 0.000655 kg; lognormal variance with pedigree 0.422, pedigree (1,1,5,5,1)
  (same comment as for Aluminium III)
- Iron ion [water, ground-, long-term]: 0.00165 kg; lognormal variance with pedigree 2.032, pedigree (1,1,5,5,1)
  (same comment as for Aluminium III)
- Iron ion [water, surface water]: 8e-6 kg; lognormal variance with pedigree 1.012, pedigree (1,1,5,5,1)
  (same comment as for Aluminium III)
- Lead II [water, ground-, long-term]: 6.5e-5 kg; lognormal variance with pedigree 1.062, pedigree (1,1,5,5,1)
  (same comment as for Aluminium III)
- Lead II [water, surface water]: 2.1e-9 kg; lognormal variance with pedigree 1.872, pedigree (1,1,5,5,1)
  (same comment as for Aluminium III)
- Magnesium [water, ground-, long-term]: 0.0312 kg; lognormal variance with pedigree 0.272, pedigree (1,1,5,5,1)
  (same comment as for Aluminium III)
- Magnesium [water, surface water]: 0.000894 kg; lognormal variance with pedigree 0.512, pedigree (1,1,5,5,1)
  (same comment as for Aluminium III)
- Manganese II [water, ground-, long-term]: 0.0189 kg; lognormal variance with pedigree 0.312, pedigree (1,1,5,5,1)
  (same comment as for Aluminium III)
- Manganese II [water, surface water]: 0.00058 kg; lognormal variance with pedigree 0.502, pedigree (1,1,5,5,1)
  (same comment as for Aluminium III)
- Mercury II [water, ground-, long-term]: 9.95e-8 kg; lognormal variance with pedigree 1.902, pedigree (1,1,5,5,1)
  (same comment as for Aluminium III)
- Mercury II [water, surface water]: 1.08e-10 kg; lognormal variance with pedigree 2.402, pedigree (1,1,5,5,1)
  (same comment as for Aluminium III)
- Molybdenum VI [water, ground-, long-term]: 1.46e-6 kg; lognormal variance with pedigree 1.642, pedigree (1,1,5,5,1)
  (same comment as for Aluminium III)
- Molybdenum VI [water, surface water]: 1.15e-8 kg; lognormal variance with pedigree 1.882, pedigree (1,1,5,5,1)
  (same comment as for Aluminium III)
- Nickel II [water, ground-, long-term]: 5.51e-5 kg; lognormal variance with pedigree 1.082, pedigree (1,1,5,5,1)
  (same comment as for Aluminium III)
- Nickel II [water, surface water]: 9.73e-8 kg; lognormal variance with pedigree 1.592, pedigree (1,1,5,5,1)
  (same comment as for Aluminium III)
- Phosphate [water, ground-, long-term]: 0.000205 kg; lognormal variance with pedigree 6.652, pedigree (1,1,5,5,1)
  (same comment as for Aluminium III)
- Phosphate [water, surface water]: 2.96e-5 kg; lognormal variance with pedigree 0.932, pedigree (1,1,5,5,1)
  (same comment as for Aluminium III)
- Potassium I [water, ground-, long-term]: 0.0525 kg; lognormal variance with pedigree 0.222, pedigree (1,1,5,5,1)
  (same comment as for Aluminium III)
- Potassium I [water, surface water]: 0.00199 kg; lognormal variance with pedigree 0.442, pedigree (1,1,5,5,1)
  (same comment as for Chloride)
- Silicon [water, ground-, long-term]: 0.00159 kg; lognormal variance with pedigree 4.052, pedigree (1,1,5,5,1)
  (same comment as for Aluminium III)
- Silicon [water, surface water]: 1.24e-5 kg; lognormal variance with pedigree 0.742, pedigree (1,1,5,5,1)
  (same comment as for Aluminium III)
- Sulfate [water, ground-, long-term]: 0.0251 kg; lognormal variance with pedigree 0.422, pedigree (1,1,5,5,1)
  (same comment as for Aluminium III)
- Sulfate [water, surface water]: 0.000635 kg; lognormal variance with pedigree 0.562, pedigree (1,1,5,5,1)
  (same comment as for Chloride)
- TOC, Total Organic Carbon [water, ground-, long-term]: 0.00292 kg; lognormal variance with pedigree 0.872, pedigree (1,1,5,5,1)
  (same comment as for Aluminium III)
- TOC, Total Organic Carbon [water, surface water]: 2.79e-6 kg; lognormal variance with pedigree 0.992, pedigree (1,1,5,5,1)
  (same comment as for Aluminium III)
- Titanium ion [water, ground-, long-term]: 0.00138 kg; lognormal variance with pedigree 0.662, pedigree (1,1,5,5,1)
  (same comment as for Aluminium III)
- Titanium ion [water, surface water]: 1.75e-6 kg; lognormal variance with pedigree 1.192, pedigree (1,1,5,5,1)
  (same comment as for Aluminium III)
- Vanadium V [water, ground-, long-term]: 1.15e-5 kg; lognormal variance with pedigree 1.512, pedigree (1,1,5,5,1)
  (same comment as for Aluminium III)
- Vanadium V [water, surface water]: 1.06e-7 kg; lognormal variance with pedigree 1.572, pedigree (1,1,5,5,1)
  (same comment as for Aluminium III)
- Zinc II [water, ground-, long-term]: 0.00137 kg; lognormal variance with pedigree 0.642, pedigree (1,1,5,5,1)
  (same comment as for Aluminium III)
- Zinc II [water, surface water]: 1.22e-6 kg; lognormal variance with pedigree 1.172, pedigree (1,1,5,5,1)
  (same comment as for Aluminium III)

## Sampling procedure
Landfill model based on observed leachate concentrations in literature. Extrapolated to 60'000 years heeding chemical characteristics. Initial waste composition from various literature sources.

## Extrapolations
This dataset has been copied from an original dataset covering the geography CH. The uncertainty has been adjusted accordingly.

## Review by Niels Jungbluth 2003-07-21
Passed. Calculation for standard deviation 95 of, i.e., infrastructure,
land occupation, transport services or other services can differ from
standard Pedigree approach used in this project and figures obtained by
this procedure.
