# treatment of spent solvent mixture, hazardous waste incineration, with energy recovery

Dataset: EcoSpold 2, unit process
Geography: RoW
Time period: 1997-01-01 to 2022-12-31
Technology level: current
Classification: ISIC rev.4 ecoinvent: 3822:Treatment and disposal of hazardous waste
Synonyms: waste solvents mixture from chemical production
Tags: Treatment; ConvertedDataset
Scenario: Business-as-Usual
System model: Allocation at the point of substitution
Share of production covered: 39 %
Generated by: Gabor Doka
Published in: Doka G. 2008
Database: ecoinvent
isCopyrightProtected: true

## General comment
Inventoried waste contains 100% waste solvents mixture; . waste composition (wet, in ppm): upper heating value 23.68 MJ/kg; lower heating value 21.7 MJ/kg; H2O 165000; O 200000; H 81660; C 477000; S 6420; N 10360; P 1000; B n.a.; Cl 24448; Br 2505.2; F 44.921; I 100.24; Ag n.a.; As n.a.; Ba n.a.; Cd n.a.; Co 4.1029; Cr n.a.; Cu 5.1445; Hg n.a.; Mn n.a.; Mo n.a.; Ni 4.2554; Pb n.a.; Sb n.a.; Se n.a.; Sn n.a.; V n.a.; Zn 41.844; Be n.a.; Sc n.a.; Sr n.a.; Ti n.a.; Tl n.a.; W n.a.; Si 31321; Fe 84.652; Ca n.a.; Al n.a.; K n.a.; Mg n.a.; Na n.a.; Share of carbon in waste that is biogenic 0%. Net energy produced in HWI: 17.11MJ/kg thermal energy and 1.27MJ/kg electric energy. Allocation of energy production: no substitution or expansion. 100% of burden allocated to waste disposal function of HWI. One kg of this waste produces 0.07563 kg of residues, which are landfilled. Additional solidification with 0.03025 kg of cement.

## Included activities end
waste-specific air and water emissions from incineration, auxiliary material consumption for flue gas cleaning. Short-term emissions to river water and long-term emissions to ground water from residual material landfill (from solidified fly ashes and scrubber slugde). Process energy demands for HWI.

## Geography
Specific to the technology encountered in Switzerland in 2000. Well applicable to modern incineration practices in Europe or North America or Japan.

## Technology
Swiss HWI plant in 2000 with wet flue gas scrubber and low-dust SCR DeNOx facility. Gross thermal efficiency 74.4% and gross electric efficiency 10%.

## Time period
Transfer coefficients for modern Swiss MSWI. Emission speciation based on early 90ies data.

## Reference product
- heat, district or industrial, other than natural gas: 1 MJ; name BP2; By-product classification allocatable product; CPC 17300: Steam and hot water; lognormal variance with pedigree 0.122, pedigree (1,1,1,5,1)
  production volume 1.67947e11 MJ
    Calculated based on the production volume of the reference product.
  property corresponding fuel use, propane, furnace >100kW 0 MJ; name fuel_use
    Lower heating value of the fuel input related to the heat/electricity output, taken directly from ecoinvent v3.0 dataset "heat production, natural gas, at industrial furnace >100kW, GLO 2000".
  property price 0.0106 EUR2005
    Average European district heat price from Ecoheatcool and Euroheat 2005-2006, Ecoheat Work package 1: The European heat market. Final report. 10.6 EUR/GJ i s the price of district heat. http://www.solarthermalworld.org/files/Ecoheatcool%20WP1%20Web.pdf?download
  properties: carbon allocation 0 kg, carbon content 0, heating value, net 1 MJ

## Inputs from technosphere
- DTPA, diethylenetriaminepentaacetic acid: 2.96416e-7, 5.52721e-8 kg (2 suppliers, which the file names only by identifier); sum of these 3.51688e-7 kg
- H3PO4 purification residue: -0.000100559 kg
- N-methyl-2-pyrrolidone: 1.86287e-17 kg
- acetic acid, without water, in 98% solution state: 1.46829e-16 kg
- acetone, liquid: 5.58187e-17, 1.80481e-16 kg (2 suppliers, which the file names only by identifier); sum of these 2.36299e-16 kg
- acrylic dispersion, with water, in 58% solution state: 4.31873e-9 kg
- acrylic varnish, with water, in 53% solution state: 1.41901e-9 kg
- activated carbon, granular: 3.97428e-8 kg
- air compressor, screw-type compressor, 300kW: 3.06999e-10 unit
- allyl chloride: 1.3392e-5 kg
- aluminium casting facility: 2.18257e-15 unit
- aluminium oxide, non-metallurgical: 7.96791e-7, 4.7064e-6 kg (2 suppliers, which the file names only by identifier); sum of these 5.50319e-6 kg
- aluminium scrap, new: -6.8455e-7, -6.8455e-7 kg (2 suppliers, which the file names only by identifier); sum of these -1.3691e-6 kg
- aluminium scrap, post-consumer: -9.03668e-8 kg
- aluminium sulfate, powder: 7.5804e-8, 4.19147e-16 kg (2 suppliers, which the file names only by identifier); sum of these 7.5804e-8 kg
- aluminium, primary, ingot: 1.15871e-6, 2.10394e-7 kg (2 suppliers, which the file names only by identifier); sum of these 1.3691e-6 kg
- aluminium, wrought alloy: 1.33426e-5 kg
- ammonia, anhydrous, liquid: 1.58349e-8, 1.65967e-9, 1.19049e-8, 1.9794e-7, 6.0996e-8, 8.15728e-9, 7.41935e-9, 1.7552e-7, 5.24333e-9 kg (9 suppliers, which the file names only by identifier); sum of these 4.84675e-7 kg
- ammonium bicarbonate: 1.15186e-6 kg
- antimony: 4.36227e-9 kg
- argon, crude, liquid: 1.80552e-16 kg
- barium hydroxide: 1.50916e-6 kg
- benzene: 2.6294e-5 kg
- building, hall: 1.50768e-5 m2
- building, hall, steel construction: 1.53205e-7 m2
- carbon dioxide, liquid: 7.08811e-19, 1.49207e-19 kg (2 suppliers, which the file names only by identifier); sum of these 8.58018e-19 kg
- chemical factory, organics: 3.19266e-13 unit
- chemical, inorganic: 5.03565e-8 kg
- chemical, organic: 1.62827e-6 kg
- chlorine, gaseous: 8.9372e-6 kg
- chlorine, liquid: 1.50559e-5, 6.93328e-10 kg (2 suppliers, which the file names only by identifier); sum of these 1.50566e-5 kg
- chloromethyl methyl ether: 1.72287e-13 kg
- chromium oxide, flakes: 2.7165e-9 kg
- chromium steel pipe: 9.72262e-7 kg
- citric acid: 1.08231e-5 kg
- clay: 3.19166e-11, 2.0793e-7 kg (2 suppliers, which the file names only by identifier); sum of these 2.07962e-7 kg
- coal tar: -1.02781e-6 kg
- compressed air, 600 kPa gauge: 4.36293e-6 m3
- concrete, normal strength: 9.92535e-9, 1.89306e-9, 1.41768e-9, 2.09174e-8, 2.17956e-9, 1.76451e-8, 7.48293e-7, 4.20311e-8 m3 (8 suppliers, which the file names only by identifier); sum of these 8.44302e-7 m3
- copper scrap, sorted, pressed: -1.01351e-6 kg
- copper, cathode: 4.30523e-5 kg
- corrugated board box: 9.53129e-8, 2.21231e-7, 3.55041e-9 kg (3 suppliers, which the file names only by identifier); sum of these 3.20094e-7 kg
- cyclohexanol: 3.11756e-19, 1.53963e-19 kg (2 suppliers, which the file names only by identifier); sum of these 4.65719e-19 kg
- dichloropropene: -1.75597e-7 kg
- diesel, burned in diesel-electric generating set, 10MW: 9.86445e-7 MJ
- diethylene glycol: 6.70306e-8 kg
- dimethyl sulfoxide: 1.52106e-15 kg
- drawing of pipe, steel: 9.72262e-7 kg
- electricity, low voltage: 7.38602e-8, 1.46374e-7, 1.40607e-6, 2.50823e-8, 5.02527e-7, 4.56132e-9, 3.48331e-7, 1.02575e-7 kWh (8 suppliers, which the file names only by identifier); sum of these 2.60939e-6 kWh
- electricity, medium voltage: 7.77814e-9, 1.05025e-8, 3.09826e-9, 1.51045e-8, 3.15296e-9, 8.71988e-9, 1.65054e-12, 1.84679e-7, 8.33551e-10, 2.32209e-10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 kWh (97 suppliers, which the file names only by identifier); sum of these 0.00059868 kWh
- electronic component factory: 1.76192e-21 unit
- esters of versatic acid: 3.39595e-8, 1.76359e-7 kg (2 suppliers, which the file names only by identifier); sum of these 2.10319e-7 kg
- ethanol, without water, in 99.7% solution state, from ethylene: 9.59837e-17, 2.13726e-16 kg (2 suppliers, which the file names only by identifier); sum of these 3.0971e-16 kg
- ethoxylated alcohol (AE7): 1.06984e-8, 5.07865e-8 kg (2 suppliers, which the file names only by identifier); sum of these 6.14849e-8 kg
- ethylene: 6.45848e-5, 1.03625e-6 kg (2 suppliers, which the file names only by identifier); sum of these 6.5621e-5 kg
- ethylene dichloride: 2.92229e-6 kg
- ethylene glycol: 5.45169e-6 kg
- ethylene glycol monoethyl ether: 1.90169e-9 kg
- fatty alcohol: 5.81167e-7 kg
- fly ash and scrubber sludge: -4.32784e-9, -3.65632e-7, -1.44226e-7 kg (3 suppliers, which the file names only by identifier); sum of these -5.14186e-7 kg
- glass fibre: 3.36782e-20 kg
- hard coal: 2.05563e-5 kg
- hard coal ash: -5.40719e-6 kg
- hazardous waste, for incineration: -1.76834e-6, -7.2542e-7, -1.8962e-8 kg (3 suppliers, which the file names only by identifier); sum of these -2.51272e-6 kg
- hazardous waste, for underground deposit: -4.08211e-7, -2.55681e-8 kg (2 suppliers, which the file names only by identifier); sum of these -4.3378e-7 kg
- heat and power co-generation unit, organic Rankine cycle, 1000kW electrical: 6.03073e-8 unit
- heat, central or small-scale, other than natural gas: 1.78471e-5, 2.45131e-7 MJ (2 suppliers, which the file names only by identifier); sum of these 1.80922e-5 MJ
- heat, district or industrial, natural gas: 0.000594128, 4.23706e-12, 1.52816e-6, 0.000130923, 2.1514e-6 MJ (5 suppliers, which the file names only by identifier); sum of these 0.00072873 MJ
- heat, district or industrial, other than natural gas: 0.00024162, 5.50515e-8, 1.06719e-12 MJ (3 suppliers, which the file names only by identifier); sum of these 0.000241675 MJ
- heat, from steam, in chemical industry: 2.8697e-5 MJ
- hydrochloric acid, without water, in 30% solution state: 3.89091e-6, 5.13663e-5 kg (2 suppliers, which the file names only by identifier); sum of these 5.52572e-5 kg
- hydrogen fluoride: 2.45537e-17, 7.20345e-17 kg (2 suppliers, which the file names only by identifier); sum of these 9.65883e-17 kg
- hydrogen peroxide, without water, in 50% solution state: 2.7856e-18, 5.86797e-19 kg (2 suppliers, which the file names only by identifier); sum of these 3.3724e-18 kg
- hydrogen, liquid: 1.82662e-15, 8.77319e-9 kg (2 suppliers, which the file names only by identifier); sum of these 8.77319e-9 kg
- industrial furnace, 1MW, oil: 4.60793e-10 unit
- industrial furnace, natural gas: 3.06999e-10 unit
- industrial machine, heavy, unspecified: 7.91163e-10 kg
- inert waste: -2.51969e-9, -2.16095e-6 kg (2 suppliers, which the file names only by identifier); sum of these -2.16347e-6 kg
- inert waste, for final disposal: -1.52665e-7, -0.00244925 kg (2 suppliers, which the file names only by identifier); sum of these -0.0024494 kg
- isopropanol: 3.29122e-6, 2.70386e-7 kg (2 suppliers, which the file names only by identifier); sum of these 3.56161e-6 kg
- kaolin: 4.88017e-6 kg
- kerosene: 6.97942e-9, 2.80756e-6, 4.18206e-8, 3.31675e-8, 1.32679e-7, 8.86191e-9, 1.71747e-8, 1.13675e-8 kg (8 suppliers, which the file names only by identifier); sum of these 3.05961e-6 kg
- krypton, gaseous: 5.91898e-19 kg
- lime, hydrated, packed: 3.16205e-15, 2.68405e-17 kg (2 suppliers, which the file names only by identifier); sum of these 3.18889e-15 kg
- limestone, crushed, for mill: 5.36251e-6 kg
- low level radioactive waste: -4.66626e-10 m3
- low level radioactive waste for final repository: -2.06844e-10 m3
- lubricating oil: 1.18724e-6, 2.42429e-7 kg (2 suppliers, which the file names only by identifier); sum of these 1.42967e-6 kg
- magnesium oxide: 2.3467e-6 kg
- magnesium sulfate: 2.73737e-8 kg
- maize starch: 6.2422e-10 kg
- metal working factory: 1.04151e-14 unit
- metalliferous hydroxide sludge: -4.46876e-8 kg
- methyl ethyl ketone: 3.05192e-9, 1.15165e-9 kg (2 suppliers, which the file names only by identifier); sum of these 4.20357e-9 kg
- municipal solid waste: -4.56747e-11, -2.68333e-9, -1.64469e-11, -1.21635e-7, -1.15089e-11 kg (5 suppliers, which the file names only by identifier); sum of these -1.24392e-7 kg
- natural gas, high pressure: 3.78524e-8, 1.59776e-8, 9.15081e-8, 2.71561e-8, 1.53624e-6, 1.57016e-7, 1.42439e-7, 1.71396e-8, 5.05765e-10, 6.08601e-8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 m3 (27 suppliers, which the file names only by identifier); sum of these 1.26388e-5 m3
- natural gas, unprocessed, at extraction: 2.44562e-5 m3
- nitric acid, without water, in 50% solution state: 7.17722e-9, 9.33702e-8, 1.06642e-8, 2.652e-8, 3.44884e-8, 1.2707e-8, 4.37038e-8, 1.15217e-8, 1.06248e-8, 6.9433e-17 kg (10 suppliers, which the file names only by identifier); sum of these 2.50777e-7 kg
- nitrogen, liquid: 1.44215e-5, 2.88267e-6 kg (2 suppliers, which the file names only by identifier); sum of these 1.73042e-5 kg
- non-ferrous metal smelter: 1.58918e-17 unit
- oxygen, liquid: 3.82811e-17, 2.32649e-6 kg (2 suppliers, which the file names only by identifier); sum of these 2.32649e-6 kg
- paper, woodfree, coated: 5.04457e-6 kg
- phosphoric acid, fertiliser grade, without water, in 70% solution state: 0.000291393 kg
- phosphoric acid, industrial grade, without water, in 85% solution state: 4.46416e-10 kg
- polarizer, liquid crystals and colour filters, for liquid crystal display: 1.9271e-15 kg
- polycarbonate: 2.22988e-17 kg
- polyethylene terephthalate, granulate, amorphous: 2.88518e-7 kg
- polyethylene, high density, granulate: 2.05045e-5 kg
- polymer foaming: 2.00345e-8 kg
- polystyrene, general purpose: 2.42279e-13 kg
- printing ink, offset, without solvent, in 47.5% solution state: 3.36426e-8 kg
- propane, burned in building machine: 2.68865e-6 MJ
- propylene: 2.18676e-8, 1.14172e-6 kg (2 suppliers, which the file names only by identifier); sum of these 1.16359e-6 kg
- propylene glycol, liquid: 3.05171e-8, 1.50711e-8 kg (2 suppliers, which the file names only by identifier); sum of these 4.55882e-8 kg
- purified terephthalic acid: 1.40428e-5 kg
- quicklime, milled, loose: 3.08533e-5 kg
- quicklime, milled, packed: 1.09901e-5 kg
- rare earth carbonate concentrate: 1.70545e-5 kg
- rare earth oxide concentrate, 50% REO: 1.17335e-5 kg
- rare earth oxide concentrate, 70% REO: 7.15001e-6 kg
- refinery sludge: -1.3284e-9, -2.18341e-8, -6.07832e-11 kg (3 suppliers, which the file names only by identifier); sum of these -2.32233e-8 kg
- scrap steel: -1.78005e-10, -8.36682e-7, -1.40497e-7 kg (3 suppliers, which the file names only by identifier); sum of these -9.77357e-7 kg
- sewage sludge, dried: -8.38805e-9 kg
- sheet rolling, aluminium: 3.26409e-5 kg
- sheet rolling, chromium steel: 2.77414e-5 kg
- sheet rolling, copper: 2.27405e-5 kg
- sheet rolling, steel: 0.00235198 kg
- silica sand: 6.33739e-6 kg
- silicon carbide: 1.599e-7 kg
- sludge, NaCl electrolysis: -1.31457e-15 kg
- soap: 7.66024e-10 kg
- soda ash, dense: 7.31641e-6 kg
- soda ash, light: 1.18338e-5 kg
- sodium hydrosulfide: 9.58774e-8 kg
- sodium hydroxide, without water, in 50% solution state: 5.44341e-5 kg
- sodium nitrite: 1.22176e-9, 6.01764e-10 kg (2 suppliers, which the file names only by identifier); sum of these 1.82353e-9 kg
- sodium phosphate: 3.5057e-15, 7.3849e-16 kg (2 suppliers, which the file names only by identifier); sum of these 4.24419e-15 kg
- sodium sulfide: 6.19369e-9 kg
- solvent, organic: 2.55621e-6 kg
- spent solvent mixture: -9.98161e-5, -3.09398e-7, -1.97501e-5 kg (3 suppliers, which the file names only by identifier); sum of these -0.000119876 kg
- steel, chromium steel 18/8: 2.77414e-5 kg
- steel, low-alloyed: 0.00235198 kg
- steel, low-alloyed, hot rolled: 2.07631e-8 kg
- stone wool: 5.42766e-6 kg
- sulfidic tailings, generic: -0.000103523 kg
- sulfuric acid: 5.64756e-5, 8.63019e-7 kg (2 suppliers, which the file names only by identifier); sum of these 5.73386e-5 kg
- synthetic rubber: 6.49625e-10 kg
- tap water: 2.62967e-6, 0.00022665, 0.000246711, 0.00193676, 1.67718e-5, 0.00259368, 0.00016184, 0.00124015 kg (8 suppliers, which the file names only by identifier); sum of these 0.00642519 kg
- tetraethyl orthosilicate: 4.03959e-6 kg
- textile, woven cotton: 1.02343e-9 kg
- thermoforming, with calendering: 1.44442e-9 kg
- titanium dioxide: 4.39955e-8, 8.7991e-8 kg (2 suppliers, which the file names only by identifier); sum of these 1.31987e-7 kg
- titanium tetrachloride: 1.61415e-9 kg
- toluene diisocyanate: 5.9644e-19, 1.10159e-19 kg (2 suppliers, which the file names only by identifier); sum of these 7.06599e-19 kg
- transport, freight train: 1.21348e-6 metric ton*km
- transport, freight, lorry 16-32 metric ton, EURO5: 5.46552e-7 metric ton*km
- trichloromethane: 2.10872e-13 kg
- trimethylamine: 2.87876e-9 kg
- tungsten concentrate: 2.94793e-6 kg
- waste concrete: -0.00173052, -0.000126947 kg (2 suppliers, which the file names only by identifier); sum of these -0.00185746 kg
- waste emulsion paint: -9.35268e-10, -8.81624e-11 kg (2 suppliers, which the file names only by identifier); sum of these -1.02343e-9 kg
- waste emulsion paint, separated: -2.54762e-9 kg
- waste glass: -3.25852e-17, -7.80527e-17, -8.46854e-16, -7.2822e-18, -1.60862e-15, -1.10584e-17, -7.98087e-15, -1.77075e-18 kg (8 suppliers, which the file names only by identifier); sum of these -1.05671e-14 kg
- waste mineral oil: -2.74816e-8, -2.94301e-6, -1.1101e-6 kg (3 suppliers, which the file names only by identifier); sum of these -4.08059e-6 kg
- waste paint on metal: -1.5536e-8, -1.31874e-10 kg (2 suppliers, which the file names only by identifier); sum of these -1.56678e-8 kg
- waste paper, unsorted: -7.07692e-7, -7.07692e-7 kg (2 suppliers, which the file names only by identifier); sum of these -1.41538e-6 kg
- waste paperboard: -3.27421e-11, -2.13549e-11, -3.9831e-9, -2.14414e-10, -1.15363e-11, -1.18311e-10, -2.863e-12 kg (7 suppliers, which the file names only by identifier); sum of these -4.38432e-9 kg
- waste paperboard, unsorted: -1.60047e-7, -1.60047e-7 kg (2 suppliers, which the file names only by identifier); sum of these -3.20094e-7 kg
- waste plastic, consumer electronics: -1.82161e-14, -2.75199e-16 kg (2 suppliers, which the file names only by identifier); sum of these -1.84913e-14 kg
- waste plastic, mixture: -1.45643e-8, -7.35963e-11, -1.62378e-10, -1.01958e-7, -9.7313e-10, -3.81677e-10, -4.01938e-10 kg (7 suppliers, which the file names only by identifier); sum of these -1.18515e-7 kg
- waste polystyrene: -3.40071e-17, -9.08438e-15, -1.44678e-17, -1.29767e-15, -3.58123e-17, -1.10567e-15, -6.55736e-18, -8.6705e-17 kg (8 suppliers, which the file names only by identifier); sum of these -1.16653e-14 kg
- waste x-ray film: -2.88518e-7 kg
- wastewater from ammonium paratungstate production: -4.73353e-8, -4.01144e-9 m3 (2 suppliers, which the file names only by identifier); sum of these -5.13467e-8 m3
- wastewater from liquid crystal display production: -1.58438e-16, -3.2763e-14 m3 (2 suppliers, which the file names only by identifier); sum of these -3.29214e-14 m3
- wastewater from vegetable oil refinery: -3.92853e-6 m3
- wastewater, average: -1.25299e-8, -1.40019e-9, -2.84512e-6, -4.98574e-7 m3 (4 suppliers, which the file names only by identifier); sum of these -3.35762e-6 m3
- wastewater, unpolluted: -2.62453e-6 m3
- water, completely softened: 2.28969e-6, 3.05881e-6 kg (2 suppliers, which the file names only by identifier); sum of these 5.3485e-6 kg
- water, deionised: 7.03575e-9, 9.70057e-8, 0.000324332 kg (3 suppliers, which the file names only by identifier); sum of these 0.000324436 kg
- wax, lost-wax casting: 2.19474e-6 kg
- white spirit: 1.1069e-8 kg
- wire drawing, copper: 4.12475e-8 kg
- wire drawing, steel: 1.92983e-5 kg
- xylene: 3.05098e-17, 5.50818e-18 kg (2 suppliers, which the file names only by identifier); sum of these 3.6018e-17 kg
- zinc: 4.46876e-9 kg
- zircon: 1.36331e-6 kg

## Inputs from nature
- Oxygen [natural resource, in air]: 5.41384e-5 kg
- Water, cooling, unspecified natural origin [natural resource, in water]: 3.8258e-5 m3
- Water, lake [natural resource, in water]: 5.32565e-9 m3
- Water, river [natural resource, in water]: 2.87539e-9 m3
- Water, unspecified natural origin [natural resource, in water]: 1.12197e-6 m3
- Water, well, in ground [natural resource, in water]: 1.28011e-6 m3

## Emissions to nature
- 2-Propanol [air, urban air close to ground]: 7.91163e-9 kg
- Acetaldehyde [air, unspecified]: 2.07679e-10 kg
- Acetic acid [air, urban air close to ground]: 3.12009e-17 kg
- Acetone [air, urban air close to ground]: 4.2671e-18 kg
- Ammonia [air, non-urban air or from high stacks]: 2.27833e-7 kg
- Ammonia [air, urban air close to ground]: 1.42927e-15 kg
- Benzene [air, unspecified]: 1.04495e-12 kg
- Benzene, ethyl- [air, urban air close to ground]: 3.51668e-10 kg
- Boric acid [air, urban air close to ground]: 3.143e-20 kg
- Boron trifluoride [air, urban air close to ground]: 2.10602e-16 kg
- Carbon dioxide, fossil [air, non-urban air or from high stacks]: 9.89896e-5 kg
- Carbon dioxide, fossil [air, unspecified]: 7.4744e-6 kg
- Carbon monoxide, fossil [air, non-urban air or from high stacks]: 1.63557e-9 kg
- Carbon monoxide, fossil [air, unspecified]: 8.34414e-9 kg
- Chlorine [air, non-urban air or from high stacks]: 2.1623e-10 kg
- Chlorine [air, unspecified]: 1.42028e-11 kg
- Chloroethylene [air, unspecified]: 3.14307e-10 kg
- Chloroform [air, unspecified]: 3.92169e-11 kg
- Chromium III [air, unspecified]: 2.77847e-13 kg
- Cyclohexane [air, urban air close to ground]: 1.11265e-18 kg
- Diethylene glycol [air, urban air close to ground]: 2.22301e-18 kg
- Dinitrogen monoxide [air, unspecified]: 1.81271e-10 kg
- Dioxins, measured as 2,3,7,8-tetrachlorodibenzo-p-dioxin [air, unspecified]: 3.46728e-19 kg
- Ethane, 1,2-dichloro- [air, unspecified]: 1.2412e-9 kg
- Ethylene [air, unspecified]: 3.83406e-8 kg
- Heptane [air, urban air close to ground]: 3.44047e-9 kg
- Hydrocarbons, aliphatic, alkanes, unspecified [air, non-urban air or from high stacks]: 2.54972e-10 kg
- Hydrochloric acid [air, non-urban air or from high stacks]: 6.98919e-10 kg
- Hydrochloric acid [air, unspecified]: 1.4232e-10 kg
- Hydrochloric acid [air, urban air close to ground]: 1.39024e-15 kg
- Hydrogen [air, unspecified]: 1.18683e-10 kg
- Hydrogen [air, urban air close to ground]: 3.0512e-18 kg
- Hydrogen fluoride [air, non-urban air or from high stacks]: 2.32324e-11 kg
- Hydrogen fluoride [air, urban air close to ground]: 1.19528e-15 kg
- Hydrogen sulfide [air, non-urban air or from high stacks]: 6.54155e-9 kg
- Methane, fossil [air, unspecified]: 2.92559e-10 kg
- Methane, tetrachloro-, R-10 [air, unspecified]: 2.08316e-11 kg
- Methanol [air, urban air close to ground]: 3.62919e-10 kg
- Monochloroethane [air, unspecified]: 3.27505e-11 kg
- NMVOC, non-methane volatile organic compounds [air, unspecified]: 4.12413e-8 kg
- NMVOC, non-methane volatile organic compounds [air, urban air close to ground]: 2.45021e-15 kg
- Nitrogen [air, unspecified]: 1.33844e-5 kg
- Nitrogen fluoride [air, urban air close to ground]: 6.15094e-19 kg
- Nitrogen oxides [air, non-urban air or from high stacks]: 6.60202e-8 kg
- Nitrogen oxides [air, unspecified]: 4.58336e-9 kg
- Nitrogen oxides [air, urban air close to ground]: 6.17129e-18 kg
- Paraffins [air, non-urban air or from high stacks]: 2.32375e-10 kg
- Particulate Matter, > 10 um [air, non-urban air or from high stacks]: 2.0814e-9 kg
- Particulate Matter, > 10 um [air, unspecified]: 2.32567e-10 kg
- Particulate Matter, > 2.5 um and < 10um [air, non-urban air or from high stacks]: 4.81364e-9 kg
- Particulate Matter, > 2.5 um and < 10um [air, unspecified]: 2.26519e-10 kg
- Phosphine [air, urban air close to ground]: 1.43614e-15 kg
- Phosphoric acid [air, urban air close to ground]: 1.11265e-18 kg
- Propanol [air, urban air close to ground]: 9.80833e-7 kg
- Propene [air, unspecified]: 6.70761e-10 kg
- Propylene oxide [air, urban air close to ground]: 6.60512e-10 kg
- Sodium tetrahydridoborate [air, urban air close to ground]: 4.08359e-16 kg
- Sulfur dioxide [air, non-urban air or from high stacks]: 1.40507e-8 kg
- Sulfur dioxide [air, unspecified]: 3.33145e-10 kg
- Sulfur hexafluoride [air, unspecified]: 4.56359e-14 kg
- Sulfur hexafluoride [air, urban air close to ground]: 2.45999e-18 kg
- Sulfuric acid [air, non-urban air or from high stacks]: 1.19682e-11 kg
- Tetramethyl ammonium hydroxide [air, urban air close to ground]: 1.47516e-14 kg
- Toluene [air, urban air close to ground]: 3.10658e-10 kg
- Trichloroethylene [air, unspecified]: 1.30169e-11 kg
- Water [air, unspecified]: 1.4669e-5 m3
- Water [air, urban air close to ground]: 2.58031e-7 m3
- Xylene [air, urban air close to ground]: 3.10658e-10 kg
- Zinc II [air, unspecified]: 1.94335e-13 kg
- AOX, Adsorbable Organic Halogen [water, surface water]: 2.51452e-9 kg
- AOX, Adsorbable Organic Halogen [water, unspecified]: 1.23246e-11 kg
- Aluminium III [water, unspecified]: 3.16425e-11 kg
- Ammonium [water, unspecified]: 4.59294e-11 kg
- Antimony ion [water, surface water]: 2.61539e-21 kg
- Antimony ion [water, unspecified]: 1.17929e-11 kg
- Arsenic ion [water, surface water]: 2.61539e-21 kg
- Arsenic ion [water, unspecified]: 6.06669e-14 kg
- BOD5, Biological Oxygen Demand [water, surface water]: 5.86722e-8 kg
- BOD5, Biological Oxygen Demand [water, unspecified]: 3.22034e-8 kg
- Benzene, hexachloro- [water, unspecified]: 1.69019e-15 kg
- Benzene, pentachloro- [water, unspecified]: 2.77346e-15 kg
- Boron [water, surface water]: 1.05072e-19 kg
- COD, Chemical Oxygen Demand [water, surface water]: 5.86722e-8 kg
- COD, Chemical Oxygen Demand [water, unspecified]: 6.3925e-8 kg
- Cadmium II [water, surface water]: 2.61539e-21 kg
- Cadmium II [water, unspecified]: 8.11344e-15 kg
- Chloride [water, unspecified]: 1.58628e-7 kg
- Chlorine [water, unspecified]: 1.74332e-7 kg
- Chloroethylene [water, unspecified]: 4.86096e-14 kg
- Chloroform [water, unspecified]: 2.17477e-13 kg
- Chromium III [water, surface water]: 2.02805e-19 kg
- Chromium III [water, unspecified]: 8.3846e-13 kg
- Chromium VI [water, surface water]: 5.2536e-21 kg
- Copper ion [water, surface water]: 2.10602e-20 kg
- Copper ion [water, unspecified]: 3.74981e-12 kg
- Cyanide [water, surface water]: 8.39668e-20 kg
- DOC, Dissolved Organic Carbon [water, surface water]: 2.19827e-8 kg
- DOC, Dissolved Organic Carbon [water, unspecified]: 2.36759e-8 kg
- Dioxins, measured as 2,3,7,8-tetrachlorodibenzo-p-dioxin [water, unspecified]: 6.04334e-19 kg
- Ethane, 1,1,1-trichloro-, HCFC-140 [water, surface water]: 5.2536e-22 kg
- Ethane, 1,2-dichloro- [water, unspecified]: 1.81148e-12 kg
- Fluoride [water, surface water]: 2.9365e-16 kg
- Fluoride [water, unspecified]: 4.00027e-7 kg
- Hydrocarbons, aromatic [water, surface water]: 1.34892e-17 kg
- Iron ion [water, surface water]: 6.03368e-20 kg
- Lead II [water, surface water]: 1.41552e-19 kg
- Lead II [water, unspecified]: 1.21456e-11 kg
- Manganese II [water, surface water]: 5.2536e-21 kg
- Mercury II [water, surface water]: 2.22301e-21 kg
- Mercury II [water, unspecified]: 1.13358e-15 kg
- Methane, tetrachloro-, R-10 [water, unspecified]: 1.33253e-13 kg
- Nickel II [water, surface water]: 5.2536e-21 kg
- Nickel II [water, unspecified]: 3.71179e-13 kg
- Nitrate [water, unspecified]: 2.27522e-11 kg
- Nitrogen [water, surface water]: 1.81927e-15 kg
- Nitrogen [water, unspecified]: 4.92046e-9 kg
- Nitrogen, organic bound [water, unspecified]: 3.27308e-10 kg
- Oils, unspecified [water, surface water]: 4.63419e-18 kg
- Oils, unspecified [water, unspecified]: 4.13832e-10 kg
- Phenol [water, surface water]: 5.2536e-21 kg
- Phosphate [water, surface water]: 5.2536e-21 kg
- Phosphorus [water, surface water]: 9.88788e-17 kg
- Phosphorus [water, unspecified]: 1.40498e-10 kg
- Sodium I [water, unspecified]: 5.15665e-7 kg
- Solids, inorganic [water, surface water]: 1.73205e-16 kg
- Sulfate [water, unspecified]: 1.61473e-8 kg
- Suspended solids, unspecified [water, unspecified]: 2.95528e-8 kg
- TOC, Total Organic Carbon [water, surface water]: 2.19827e-8 kg
- TOC, Total Organic Carbon [water, unspecified]: 2.36759e-8 kg
- Water [water, unspecified]: 2.24983e-5 m3
- Zinc II [water, unspecified]: 2.00398e-11 kg

## Sampling procedure
The 2 Swiss HWI plants, used as the inventory reference technology mix, have a total annual capacity of 53'000 tons of hazardous waste. This corresponds to 39% of the Swiss total installed capacity in 2000. Swiss average plants size is 20'000 t/a.

## Extrapolations
Available waste composition data. Transfer coefficients from one modern HWI completed with data from MSWI. Waste-specific auxiliary material consumption adapted from MSWI. This dataset has been copied from an original dataset covering the geography CH. The uncertainty has been adjusted accordingly.
