# manual dismantling of used electric scooter

Dataset: EcoSpold 2, unit process
Geography: GLO
Time period: 2005-01-01 to 2022-12-31
Technology level: current
Classification: ISIC rev.4 ecoinvent: 3830:Materials recovery
Classification: EcoSpold01Categories: waste management/recycling
Tags: Treatment
Scenario: Business-as-Usual
System model: Allocation at the point of substitution
Share of production covered: 100 %
Generated by: Andrea Del Duce
Published in: Hischier R. 2007
Database: ecoinvent
isCopyrightProtected: true

## General comment
This dataset describes the treatment of a used electric scooter. The entries are given for the treatment of 1 kg of scooter. The treatment involves the manual dismantling of the scooter into its various modules (glider and drivetrain) which are then disposed of in specific disposal facilities. The treatment of the used glider and drivetrain is described in the respective datsets. Hence, this dataset only comprises the manual dismantling facility.
[This dataset was already contained in the ecoinvent database version 2. It was not individually updated during the transfer to ecoinvent version 3. Life Cycle Impact Assessment results may still have changed, as they are affected by changes in the supply chain, i.e. in other datasets. This dataset was generated following the ecoinvent quality guidelines for version 2. It may have been subject to central changes described in the ecoinvent version 3 change report (http://www.ecoinvent.org/database/ecoinvent-version-3/reports-of-changes/), and the results of the central updates were reviewed extensively. The changes added e.g. consistent water flows and other information throughout the database. The documentation of this dataset can be found in the ecoinvent reports of version 2, which are still available via the ecoinvent website. The change report linked above covers all central changes that were made during the conversion process.]

## Included activities start
The dataset takes as input the used scooter and describes its manual dismantling in a treatment facility, which has been modelled with infrastructure and efforts from the electronics waste industry.

## Included activities end
The dataset only includes the manual dismantling facility since the various modules of the scooter (glider and drivetrain) are treated in specific disposal facilities.

## Geography
data of situation in Switzerland

## Technology
current manual dismantling activities in Switzerland.

## Reference product
- manual dismantling of electric scooter: 1 unit; By-product classification allocatable product; CPC 894: Materials recovery (recycling) services, on a fee or contract basis
  production volume 9.32e7 unit
    Rough estimate based on 1% electric scooters out of 466E6 world two wheeler production projection between 2010 and 2016.(www.electric-bicycle-guide.com)
  property price 0.00337898 EUR2005
    Calculated based on inputs: The price of the product has been calculated as a sum of the values of the material and energy inputs for this product. This value is therefore a rough estimation. It may underestimate the real price since there are additional expenses when producing any product. These expences can include for example labour costs, treatment of waste materials and profit for the producer. Please consider carefully whether this level of data quality is acceptable for your application.
  properties: carbon allocation 0 kg, carbon content 0

## Inputs from technosphere
- manual treatment facility, waste electric and electronic equipment: 1.6e-8 unit; source Hischier R. 2007; lognormal variance with pedigree 0.578, pedigree (4,5,5,5,5)
  Value taken from manual dismantling of electronic waste. Pedigree matrix changed accordingly. Original comment:rough estimation of infrastructure
  EcoSpold01Location=GLO
  Uncertainty: rough estimation of infrastructure

## Sampling procedure
Values for electronic waste have been taken for escooter manual dismantling.

## Extrapolations
none Original comment from the electronic waste, manual dismantling dataset: This dataset has been copied from an original dataset covering the geography CH. The uncertainty has been adjusted accordingly.

## Review by Christian Bauer 2012-09-14
passed
