# mine infrastructure construction, treatment of sulfidic tailing, off-site, high gold content

Dataset: EcoSpold 2, unit process
Geography: ZA
Time period: 2012-01-01 to 2022-12-31
Technology level: current
Classification: EcoSpold01Categories: metals/extraction
Classification: ISIC rev.4 ecoinvent: 4290:Construction of other civil engineering projects
Scenario: Business-as-Usual
System model: Allocation at the point of substitution
Share of production covered: 6.3 %
Generated by: Russo
Published in: Charikinya E. 2017
Database: ecoinvent
isCopyrightProtected: true

## General comment
This dataset describes the production of 1 unit of gold mine infrastructure. It includes land use and buildings and machinery consumption, as in surface operation, intended as retreatment of sulfific tailing. Data corresponds to those plants that operate retreatment of sulfidic tailing, specifically: AngloGold Ahanti MWS, Harmony and DRD.

## Included activities start
From unoccupied land foreseen for a treatment plant.

## Included activities end
This activity ends with the transformation of occupied land, in time.

The dataset includes land transformation and occupation of the treatment plant, as well as the consumption of buildings and machinery for such plant.

## Geography
Land use of South-African mine, other inputs based on rough assumptions.
Most of the mining operation and unrefined gold production activities are in an area called Witwatersrand basin. The are is approximately 350 km long and 200 km wide. the gold mines in this area are possiblu the deepest in the world (mining operation at 3600 m and explortion core-drilling up to 4600 m. Peak gold production occurred in 1970 when over 1000 metinc tonnes were mined.

## Technology
The treatment plant is foreseen to have an undefined lifetime, however a default value fo 50 years has been used for consistency
In Surface Mine Operation (i.e. treatment of sulfidic tailing, off-site, high gold content) the tailing are moved by pipes: water is mixed with the tailing and the mixture is pumped through the various stages of the recovery plant.

## Time period
Period of public environmental report

## Reference product
- mine infrastructure, treatment of sulfidic tailing, off-site, high gold content: 1 unit; By-product classification allocatable product; CPC 5326: Mines and industrial plants
  Calculated value from Companies Environmental and Operational reports
  production volume 0.06 unit
    There is 1 main company that operate mine waste recovery and other 2 companies have dedicated surface operations site to retreat sulfidic tailing.
  property price 3.22376e7 EUR2005
    Calculated based on inputs: The price of the product has been calculated as a sum of the values of the material and energy inputs for this product. This value is therefore a rough estimation. It may underestimate the real price since there are additional expenses when producing any product. These expences can include for example labour costs, treatment of waste materials and profit for the producer. Please consider carefully whether this level of data quality is acceptable for your application.
  properties: carbon allocation 0 kg, carbon content 0, carbon content, fossil 0, carbon content, non-fossil 0, dry mass 1 kg, lifetime 50 year, lifetime capacity [kg] 0 kg, water content 0, water in wet mass 0 kg, wet mass 1 kg

## Inputs from technosphere
- building, hall: 12500 m2; source Classen M. 2009; lognormal variance with pedigree 0.318, pedigree (4,5,5,5,5)
  EcoSpold01Location=CH
  Estimation: As of this exchange, mine construction process represents that of underground mining, and is assumed to be equivalent o the one depicted in the ecoinvent generic dataset (v2) "non-ferrous metal, mine, underground", in Part XIV of cited source.
  Uncertainty: Rough estimates
- building, multi-storey: 275000 m3; source Classen M. 2009; lognormal variance with pedigree 0.318, pedigree (4,5,5,5,5)
  EcoSpold01Location=RER
  Estimation: As of this exchange, mine construction process represents that of underground mining, and is assumed to be equivalent o the one depicted in the ecoinvent generic dataset (v2) "non-ferrous metal, mine, underground", in Part XIV of cited source.
  Uncertainty: Rough estimates
- conveyor belt: 600 m; source Classen M. 2009; lognormal variance with pedigree 0.318, pedigree (4,5,5,5,5)
  (same comment as for building, multi-storey)
- industrial machine, heavy, unspecified: 850000 kg; source Classen M. 2009; lognormal variance with pedigree 0.318, pedigree (4,5,5,5,5)
  Estimation: As of this exchange, mine construction process represents that of underground mining, and is assumed to be equivalent o the one depicted in the ecoinvent generic dataset (v2) "non-ferrous metal, mine, underground", in Part XIV of cited source.
  EcoSpold01Location=RER
  Uncertainty: Rough estimates

## Inputs from nature
All rows: source Placer Dome Inc. 2002
- Occupation, mineral extraction site [natural resource, land]: 2.36e9 m2*year; = 4.72E+07*50; lognormal variance with pedigree 0.0801, pedigree (1,2,5,1,1)
  Calculated value from companies reports from the total disturbed land. The value is a weigthed average (geomean) and it is quite robust since it correlated quite well (R=0.999801592) with the median of the same set of samples. The entire area of the mine is not in active use at one time; "disturbed area in active use" values reported in literature are assumed to be the average share of the mine area in use along 50 years of operation.
  The occupation of the mine was then calculated as:
  Ocupation, mineral extraction site = (Total disturbed area in active use) * 50 years =4.72E07 m2 * 50 years = 2.36E09 m2y
  Uncertainty: Environmental report, Placer-Dome 2002
- Transformation, from mineral extraction site [natural resource, land]: 4.72e7 m2; triangular min 335208, mostLikely 4.17462e6, max 1.3709e8, pedigree (1,2,5,1,1)
  Calculated value from companies reports from the total disturbed land. The value is a weigthed average (geomean) and it is quite robust since it correlated quite well (R=0.999801592) with the median of the same set of samples.
- Transformation, from unspecified [natural resource, land]: 4.72e7 m2; triangular min 335208, mostLikely 4.17462e6, max 1.3709e8, pedigree (1,2,5,1,1)
  (same comment as for Transformation, from mineral extraction site)
- Transformation, to mineral extraction site [natural resource, land]: 4.72e7 m2; triangular min 335208, mostLikely 4.17462e6, max 1.3709e8, pedigree (1,2,5,1,1)
  (same comment as for Transformation, from mineral extraction site)
- Transformation, to unspecified [natural resource, land]: 4.72e7 m2; triangular min 335208, mostLikely 4.17462e6, max 1.3709e8, pedigree (1,2,5,1,1)
  (same comment as for Transformation, from mineral extraction site)

## Sampling procedure
Companies Operational and Sustainable reports:
AngloGlodAshanti Limited, Operational Report - Surface Operations, 2016
DRDGold Limited, Annual Integrated Report, 2016
Harmony, Integrated Annual Report, 2016
Harmony, Operational Performance, 2016

## Extrapolations
Buildings and machinery are based on global assumptions. The figures are extrapolated on the basis of the ore production. Transformation and occupation figures have been calculate as weighted average according to the shares of production, so as to represent an average gold mining site. One additional data, not reported in the Exchanges, but it's worth to mention, is the so-called Mining Rigth Land: this figure for an average gold mining site is of 4,84E+07 m2; values range from 3,97E+07 m2 to 1.55E+09 m2. Data are from years 2012-2016.
