# petroleum and gas production, offshore

Dataset: EcoSpold 2, unit process
Geography: CA
Time period: 2019-01-01 to 2022-12-31
Technology level: current
Classification: ISIC rev.4 ecoinvent: 06:Extraction of crude petroleum and natural gas
Scenario: Business-as-Usual
System model: Allocation at the point of substitution
Share of production covered: 100 %
Generated by: Christoph Meili
Published in: Meili, C. 2022
Database: ecoinvent
isCopyrightProtected: true

## General comment
The multioutput process “petroleum and gas production, offshore” delivers the co-products crude petroleum oil [kg] and natural gas [m3] via conventional extraction methods. Separate production of crude petroleum oil and natural gas (i.e., non-associated) is considered implicitly within this inventory, which is based on total output by country.
The production of petroleum and/or natural gas in Canada in 2019 is modelled as 7 % offshore and 93 % onshore production following the approach described in Meili et al. (2022; section 4.1).
The dataset covers the environmental impact of extraction and delivery to coastal plant of petroleum and natural gas. It includes country-specific methane emissions (vented, fugitive, and from flaring), the discharge of produced water, and the direct energy use during oil extraction including drilling and flaring. Flaring is the controlled and intentional burning of natural gas as part of production and processing of crude oil and natural gas. Reasons for flaring include safety, economics (oil vs. gas price), disposal of gas of inferior quality, etc.
Furthermore, emissions due to oil spills related with drilling and pumping operations are included in this inventory, but excluding spills related to transportation and refining. Amounts of oil spilled to sea (offshore) and river/soil (onshore) per kg oil-equivalent of production were derived for world regions from three-year averages based on IOGP (2020).
The inventory for this combined crude oil and natural gas production activity is mainly allocated based on the net calorific values and the annual production volumes of the co-products. The allocation of methane emissions from venting and fugative natural gas emissions is based on the country-specific information for 2019 from IEA"s Methane Tracker 2022. The IEA factors for oil and gas extraction are used directly to split the total emissions between natural gas and crude oil per country. Freshwater use and water discharge are allocated to crude petroleum oil only.The underlying inventory was created as described in Meili et al. (2022), using generic a gross calorific value (GCV) of 40MJ/m3, a net calorific value (NCV) of 36.0 MJ/m3 and a density of 0.735kg/m3 for natural gas, in line with the global statistics (referring to standard cubic meters, Sm3, measured at 15°C and 1013 mbar). A net calorific value of 43.4 MJ/kg is used for crude petroleum oil and related products like condensates and liquefied natural gas liquids, with the density of crude oil set to 858.1 kg/m3.
Reference(s):
C. Meili, N. Jungbluth, M. Bussa (2022) Life cycle inventories of crude oil and natural gas extraction. ESU-services Ltd. Schaffhausen, Switzerland. Available from: http://esu-ser-vices.ch/data/public-lci-reports/
IOGP (2020) Environmental performance indicators - 2019 data. International Association of Oil and Gas Producers (IOGP), retrieved from: https://www.iogp.org/bookstore/product/iogp-report-2019e-environmental-performance-indicators-2019-data/

## Included activities start
From exploration activities (e.g., fuel requirements and emissions from well testing). Production via conventional extraction methods for petroleum and natural gas, considering infrastructure inputs of the offshore platform and gas processing plants, energy requirements, auxiliary chemicals consumption, and emissions.

## Included activities end
The activity ends with the dried (processed) natural gas and the crude petroleum oil at shore, ready for long-distance transport (transmission) and/or distribution. Neither gas processing activities primarily intended for the production of natural gas liquids nor secondary liquid separation are considered. Transport of platforms to the destination (site of extraction) is not considered.

## Geography
Canada

## Technology
This dataset represents the offshore extraction of petroleum and gas via conventional extraction methods. This includes the gas lift process and deep-pump pumping (see Meili et al., 2022, chapter 3.1), as well as a default share of 15% enhanced oil recovery (EOR; described in section 4.2 of Meili et al. 2022). For the natural gas production, also the processing of the gas (e.g., drying and desulfurization) is considered.

## Time period
Time of most relevant publications and statistics. Other generic data, e.g. for infrastructure are based on older publications.

## Reference product
- petroleum: 1 kg; By-product classification allocatable product; CPC 12010: Petroleum oils and oils obtained from bituminous minerals, crude; CAS 8002-05-9
  Calculation based on onshore-share of Alberta and Saskatchewan. Data from https://www.cer-rec.gc.ca/en/data-analysis/energy-commodities/crude-oil-petroleum-products/statistics/estimated-production-canadian-crude-oil-equivalent.html, cited on https://en.wikipedia.org/wiki/Petroleum_industry_in_Canada#cite_note-NEB_2015-11
  production volume 2.0064e10 kg
    Calculation based on onshore-share of Alberta and Saskatchewan. Data from https://www.cer-rec.gc.ca/en/data-analysis/energy-commodities/crude-oil-petroleum-products/statistics/estimated-production-canadian-crude-oil-equivalent.html, cited on https://en.wikipedia.org/wiki/Petroleum_industry_in_Canada#cite_note-NEB_2015-11 (as described in Meili et al. 2022)
  property price 0.192 EUR2005
    Temporary price data. Calculated as 90% of purchasers price based on: Crude oil prices from U.S. energy information administration_Independent statistics and analysis: Weekly All Countries Spot Price FOB Weighted by Estimated Export Volume (Dollars per Barrel) (http://tonto.eia.doe.gov/dnav/pet/pet_pri_wco_k_w.htm; accessed 06072010). Conversion factors - 0.159 m3/barrel with crude oil density of 853 kg/m3
  properties: carbon allocation 0.84 kg, carbon content 0.84, carbon content, fossil 0.84, carbon content, non-fossil 0, dry mass 1 kg, heating value, net 43.4 MJ, water content 0, water in wet mass 0 kg, wet mass 1 kg

## Inputs from technosphere
- chemical, inorganic: 0.000553263 kg; lognormal variance with pedigree 0.130695, pedigree (4,4,1,3,5)
  Generic estimation
  properties: carbon content, fossil 0.003, dry mass 1 kg, wet mass 1 kg
- chemical, organic: 0.00042202 kg; lognormal variance with pedigree 0.130695, pedigree (4,4,1,3,5)
  Generic estimation
  properties: carbon content, fossil 0.628, dry mass 1 kg, heating value, net 19.03 MJ, wet mass 1 kg
- diesel, burned in diesel-electric generating set, 10MW, for oil and gas extraction: 0.0522777 MJ; lognormal variance with pedigree 0.123, pedigree (3,2,2,3,5)
  Data for 2019, IOGP 2020
- electricity, medium voltage: 0.0546518 kWh; lognormal variance with pedigree 0.123, pedigree (3,2,2,3,5)
  Data for 2019, IOGP 2020
- hazardous waste, for underground deposit: -0.000200047 kg; lognormal variance with pedigree 0.124695, pedigree (3,4,1,3,5)
  Generic estimation
  production volume
    Estimation, as described in Meili et al. (2022)
  properties: carbon content, fossil 0.554667, dry mass 1 kg, wet mass 1 kg
- municipal solid waste: -0.000100024 kg; lognormal variance with pedigree 0.124695, pedigree (3,4,1,3,5)
  Generic estimation
  production volume
    Estimation, as described in Meili et al. (2022)
  properties: carbon content, fossil 0.171549, carbon content, non-fossil 0.261655, dry mass 0.771 kg, heating value, net 11.74 MJ, water content 0.297017, wet mass 1 kg
- natural gas, vented: 0.00593641 m3; lognormal variance with pedigree 0.1212, pedigree (2,1,1,1,5)
  Country specific methane emissions according to IEA 2022, includes all methane emissions from upstream production, recalculated using a share of 0.88 Nm3 methane per Nm3 natural gas. Allocation based on country specific emissions for oil and gas.
- offshore platform, petroleum: 4.09993e-11 unit; lognormal variance with pedigree 0.425837, pedigree (3,4,1,3,5)
  Lodewijkx et al. 2001
- offshore well, oil/gas: 1.59083e-5 m; lognormal variance with pedigree 0.425837, pedigree (3,4,1,3,5)
  Weighted average of specifically cited literature values
- pipeline, petroleum, offshore: 5.91607e-9 km; lognormal variance with pedigree 0.425837, pedigree (3,4,1,3,5)
  Generic estimation based on estimate for Nigeria 2018
- sweet gas, burned in gas turbine: 2.55773 MJ; lognormal variance with pedigree 0.123, pedigree (3,2,2,3,5)
  Data for 2019, IOGP 2020, SOx content of sour gas assessed separately in overall emissions.
- waste natural gas, sweet: -0.0905375 MJ; lognormal variance with pedigree 0.1227, pedigree (3,2,1,1,5)
  Total amount of flared gas per kg OE according to Worldbank 2022 (reference year 2019), Sox emissions from flared sour gas assessed separately in overall emissions.
  production volume
    Total amount of flared gas per kg OE according to Worldbank 2022 (reference year 2019)
- water discharge from petroleum extraction, offshore: -1 kg; lognormal variance with pedigree 0.129295, pedigree (4,3,1,3,5)
  Generic estimation
  production volume
    Estimation, as described in Meili et al. (2022)

## Inputs from nature
- Oil, crude [natural resource, in ground]: 1.00007 kg; lognormal variance with pedigree 0.120595, pedigree (1,1,1,1,5)
  BP Statistical Review of World Energy 2020
- Water, salt, ocean [natural resource, in water]: 0.000464628 m3; lognormal variance with pedigree 0.123295, pedigree (3,3,1,3,5)
  salt water use for offshore production assumed to be the same as freshwater use onshore
- Water, unspecified natural origin [natural resource, fossil well]: 0.000535387 m3; lognormal variance with pedigree 0.123295, pedigree (3,3,1,3,5)
  Balancing of input-output

## Emissions to nature
- Methane, bromotrifluoro-, Halon 1301 [air, non-urban air or from high stacks]: 1.16462e-8 kg; lognormal variance with pedigree 0.1638, pedigree (3,3,1,3,5)
  assuming 20% halon compared to Jungbluth 2007
- Methane, trifluoro-, HFC-23 [air, non-urban air or from high stacks]: 4.65833e-8 kg; lognormal variance with pedigree 0.1638, pedigree (3,3,1,3,5)
  assuming 80% HFC-23 compared to Jungbluth 2007
- Nitrogen oxides [air, non-urban air or from high stacks]: 0.000526805 kg; lognormal variance with pedigree 0.1618, pedigree (2,1,1,3,5)
  Average 2017 to 2019, IOGP 2020
- Sulfur dioxide [air, non-urban air or from high stacks]: 0.000103357 kg; lognormal variance with pedigree 0.1213, pedigree (2,1,1,3,5)
  Average 2017 to 2019, IOGP 2020
- AOX, Adsorbable Organic Halogen [water, ocean]: 4.26932e-10 kg; lognormal variance with pedigree 0.1618, pedigree (2,1,1,3,5)
  Extrapolation for sum parameter
- BOD5, Biological Oxygen Demand [water, ocean]: 0.000130588 kg; lognormal variance with pedigree 0.1618, pedigree (2,1,1,3,5)
  Extrapolation for sum parameter
- COD, Chemical Oxygen Demand [water, ocean]: 0.000130588 kg; lognormal variance with pedigree 0.1618, pedigree (2,1,1,3,5)
  Extrapolation for sum parameter
- DOC, Dissolved Organic Carbon [water, ocean]: 3.58626e-5 kg; lognormal variance with pedigree 0.1618, pedigree (2,1,1,3,5)
  Extrapolation for sum parameter
- Nitrogen [water, ocean]: 3.20206e-8 kg; lognormal variance with pedigree 0.1618, pedigree (2,1,1,3,5)
  Extrapolation for sum parameter
- Oils, unspecified [water, ocean]: 4.14489e-5 kg; lognormal variance with pedigree 0.1618, pedigree (2,1,1,3,5)
  Average 2017 to 2019, IOGP 2020
- Sulfur [water, ocean]: 1.11003e-7 kg; lognormal variance with pedigree 0.1618, pedigree (2,1,1,3,5)
  Extrapolation for sum parameter
- TOC, Total Organic Carbon [water, ocean]: 3.58626e-5 kg; lognormal variance with pedigree 0.1618, pedigree (2,1,1,3,5)
  Extrapolation for sum parameter
- Water [water, ocean]: 0.001 m3; lognormal variance with pedigree 0.1638, pedigree (3,3,1,3,5)
  calculation

## Sampling procedure
Statistics and use of generic data
Data were collected from existing literature, statistics, and environmental reports. Where no country specific data was available, extrapolations or global averages served as proxy.
Methane and flaring emissions, consumption of energy, production figures and other key indicators are updated with the latest version of key data sources for petroleum and natural gas extraction (BP 2020; IOGP 2020; World Bank 2022; IEA 2022a,b). For methane emissions, data are aligned to ensure that the total inventoried methane emissions for petroleum and natural gas match the global total reported in actual studies.
The data of flaring are taken from the Global Gas Flaring Reduction Partnership (GGFR), which estimated the country specific amounts of flared gas based on satellite measurements done according to a methodology provided by the National Oceanic and Atmospheric Administration (NOAA), a part of the US department of Defense. These measured flaring data are provided publicly for the reference year 2019 (World Bank 2022). The country-specific value for flaring can be found in Meili et al. 2022, table 9.1.
In general, to assess the overall methane emissions of natural gas, the methane emission rate is divided by a share of 0.585 kg of methane per m3 of natural gas.
References:
BP (2020) BP Statistical Review of World Energy 2019. BP, London, UK. Retrieved from: https://www.bp.com/en/global/corporate/energy-economics/statistical-review-of-world-energy.html
IEA (2022a) Methane Tracker 2022. International Energy Agency, Paris, France. Retrieved from: https://www.iea.org/reports/global-methane-tracker-2022
IEA (2022b) Global Methane Tracker - Documentation - 2022 Version. International Energy Agency, Paris, France. Retrieved from: https://iea.blob.core.windows.net/assets/b5f6bb13-76ce-48ea-8fdb-3d4f8b58c838/GlobalMethaneTracker_documentation.pdf
World Bank (2022) World Data Bank for Global Gas Flaring Reduction, retrieved from: https://www.worldbank.org/en/programs/gasflaringreduction/global-flaring-data

## Extrapolations
A part of the data has been estimated with generic assumptions for offshore production.
The modules for crude oil and natural gas production are complete in terms of environmental impacts. However, the variation between different oil fields can be extremely high. A part of the data was available for single oil fields, for regional averages or for globally operating companies only. Thus, the derived estimates on a country level come with uncertainty, which is specified for each exchange in the uncertainty pedigree matrix. For the direct energy uses of fuel oil, gas and electricity, region-specific data for the reference year 2019 are applied (IOGP 2020). Consumption of freshwater for enhanced oil recovery (EOR) is based on the reported average over three years (2017-2019) per world region (IOGP 2020).
