# treatment of spent antifreezer liquid, hazardous waste incineration, with energy recovery

Dataset: EcoSpold 2, unit process
Geography: CH
Time period: 1997-01-01 to 2022-12-31
Technology level: current
Classification: ISIC rev.4 ecoinvent: 3822:Treatment and disposal of hazardous waste
Synonyms: mixture of aqueous solutions of ethylene glycol and propylene glycol; mixture of aqueous solutions of EG and PG; mixture of aqueous solutions of 1,2-ethanediol and 1,2-propanediol
Tags: Treatment; ConvertedDataset
Scenario: Business-as-Usual
System model: Allocation at the point of substitution
Share of production covered: 39 %
Generated by: Gabor Doka (obsolete)
Published in: Doka G. 2008
Database: ecoinvent
isCopyrightProtected: true

## General comment
Inventoried waste contains 100% Anti-Freeze liquid; . waste composition (wet, in ppm): upper heating value 10.92 MJ/kg; lower heating value 0.5551 MJ/kg; H2O 518000; O 225500; H 48800; C 207900; S n.a.; N n.a.; P n.a.; B n.a.; Cl n.a.; Br n.a.; F n.a.; I n.a.; Ag n.a.; As n.a.; Ba n.a.; Cd n.a.; Co n.a.; Cr n.a.; Cu n.a.; Hg n.a.; Mn n.a.; Mo n.a.; Ni n.a.; Pb n.a.; Sb n.a.; Se n.a.; Sn n.a.; V n.a.; Zn n.a.; Be n.a.; Sc n.a.; Sr n.a.; Ti n.a.; Tl n.a.; W n.a.; Si n.a.; Fe n.a.; Ca n.a.; Al n.a.; K n.a.; Mg n.a.; Na n.a.; Share of carbon in waste that is biogenic 0%. Net energy produced in HWI: 17.11MJ/kg thermal energy and 1.27MJ/kg electric energy. Allocation of energy production: no substitution or expansion. 100% of burden allocated to waste disposal function of HWI. One kg of this waste produces 0.002287 kg of residues, which are landfilled. Additional solidification with 0.0009147 kg of cement.
[This dataset is meant to replace the following datasets:]

## Included activities end
waste-specific air and water emissions from incineration, auxiliary material consumption for flue gas cleaning. Short-term emissions to river water and long-term emissions to ground water from residual material landfill (from solidified fly ashes and scrubber slugde). Process energy demands for HWI.

## Geography
Specific to the technology encountered in Switzerland in 2000. Well applicable to modern incineration practices in Europe or North America or Japan.

## Technology
Swiss HWI plant in 2000 with wet flue gas scrubber and low-dust SCR DeNOx facility. Gross thermal efficiency 74.4% and gross electric efficiency 10%.

## Time period
Transfer coefficients for modern Swiss MSWI. Emission speciation based on early 90ies data.

## Parameters
- fraction, process water, to air: 1 dimensionless; name fraction_PW_to_air; lognormal variance with pedigree 0.092025, pedigree (4,4,3,2,4)
  Calculated value. During incineration all water incorporated in the products entering the incinerator evaporate to air.

## Reference product
- heat, district or industrial, other than natural gas: 1 MJ; name BP2; By-product classification allocatable product; CPC 17300: Steam and hot water; lognormal variance with pedigree 0.120025, pedigree (1,1,1,2,1)
  production volume 0.576052 MJ
    Calculated based on the production volume of the reference product.
  property corresponding fuel use, propane, furnace >100kW 0 MJ; name fuel_use
    Lower heating value of the fuel input related to the heat/electricity output, taken directly from ecoinvent v3.0 dataset "heat production, natural gas, at industrial furnace >100kW, GLO 2000".
  property price 0.0106 EUR2005
    Average European district heat price from Ecoheatcool and Euroheat 2005-2006, Ecoheat Work package 1: The European heat market. Final report. 10.6 EUR/GJ i s the price of district heat. http://www.solarthermalworld.org/files/Ecoheatcool%20WP1%20Web.pdf?download
  properties: carbon allocation 0 kg, carbon content 0, heating value, net 1 MJ

## Inputs from technosphere
- average incineration residue: -9.67375e-11, -8.2114e-13 kg (2 suppliers, which the file names only by identifier); sum of these -9.75587e-11 kg
- blast furnace sludge: -0.000638495, -0.000373451, -0.000990309, -2.23485e-5 kg (4 suppliers, which the file names only by identifier); sum of these -0.0020246 kg
- chemical, inorganic: 1.19138e-8 kg
- chemical, organic: 1.19138e-8 kg
- diesel: 2.69298e-8 kg
- electricity, medium voltage: 9.17141e-5, 0.00191297, 0.000596909, 0.00838882, 1.77759e-5, 9.07002e-5, 0.00547669, 0.000299567 kWh (8 suppliers, which the file names only by identifier); sum of these 0.0168752 kWh
- ethylene glycol: 8.18234e-9 kg
- municipal solid waste: -1.24753e-11, -7.32907e-10, -4.49219e-12, -8.82302e-9, -3.14346e-12 kg (5 suppliers, which the file names only by identifier); sum of these -9.57603e-9 kg
- natural gas processing plant: 1.77134e-15 unit
- natural gas, high pressure: 0.00449579 m3
- silicone factory: 1.06598e-13, 1.06523e-13 unit (2 suppliers, which the file names only by identifier); sum of these 2.13122e-13 unit
- soda ash, light: 9.48612e-9 kg
- spent antifreezer liquid: -0.00106564 kg
- spent solvent mixture: -2.27698e-9, -2.08442e-11, -8.89694e-10 kg (3 suppliers, which the file names only by identifier); sum of these -3.18752e-9 kg
- waste emulsion paint: -5.05666e-15, -1.70909e-10, -1.61106e-11 kg (3 suppliers, which the file names only by identifier); sum of these -1.87025e-10 kg
- waste mineral oil: -1.3381e-10, -1.41526e-8, -5.40516e-9 kg (3 suppliers, which the file names only by identifier); sum of these -1.96916e-8 kg
- waste textile, soiled: -6.157e-10, -9.21544e-12 kg (2 suppliers, which the file names only by identifier); sum of these -6.24915e-10 kg
- waste wood, untreated: -9.54419e-13, -8.75718e-12, -1.30543e-11, -1.39485e-9, -5.53931e-12, -1.65925e-10, -3.66657e-11, -1.05137e-10 kg (8 suppliers, which the file names only by identifier); sum of these -1.73088e-9 kg
- waste, from silicon wafer production, inorganic: -0.000639365 kg

## Emissions to nature
- Carbon dioxide, fossil [air, non-urban air or from high stacks]: 7.50797e-5 kg
- Helium [air, unspecified]: 1.08538e-7 kg
- Methane, fossil [air, non-urban air or from high stacks]: 7.3731e-8 kg
- NMVOC, non-methane volatile organic compounds [air, non-urban air or from high stacks]: 3.02117e-7 kg
- Nitrogen oxides [air, non-urban air or from high stacks]: 6.92352e-8 kg
- Sulfur dioxide [air, non-urban air or from high stacks]: 2.12651e-10 kg
- AOX, Adsorbable Organic Halogen [water, unspecified]: 4.15411e-16 kg
- Ammonium [water, unspecified]: 4.25751e-12 kg
- BOD5, Biological Oxygen Demand [water, unspecified]: 1.22286e-9 kg
- COD, Chemical Oxygen Demand [water, unspecified]: 1.22286e-9 kg
- DOC, Dissolved Organic Carbon [water, unspecified]: 2.99869e-9 kg
- Methanol [water, unspecified]: 1.80731e-10 kg
- Nitrogen [water, unspecified]: 3.11558e-14 kg
- Oils, unspecified [water, unspecified]: 4.03272e-11 kg
- Phenol [water, unspecified]: 2.12651e-12 kg
- Sulfur [water, unspecified]: 1.07899e-13 kg
- TOC, Total Organic Carbon [water, unspecified]: 2.99869e-9 kg
- Triethylene glycol [water, unspecified]: 5.43991e-10 kg

## Sampling procedure
The 2 Swiss HWI plants, used as the inventory reference technology mix, have a total annual capacity of 53'000 tons of hazardous waste. This corresponds to 39% of the Swiss total installed capacity in 2000. Swiss average plants size is 20'000 t/a.

## Extrapolations
Available waste composition data. Transfer coefficients from one modern HWI completed with data from MSWI. Waste-specific auxiliary material consumption adapted from MSWI.
