# electronic component machinery production, unspecified

Dataset: EcoSpold 2, unit process
Geography: GLO
Time period: 2005-01-01 to 2022-12-31
Technology level: current
Classification: ISIC rev.4 ecoinvent: 2829:Manufacture of other special-purpose machinery
Classification: EcoSpold01Categories: electronics/component
Tags: ConvertedDataset
Scenario: Business-as-Usual
System model: Allocation at the point of substitution
Generated by: Roland Hischier
Published in: Hischier R. 2007
Database: ecoinvent
isCopyrightProtected: true

## General comment
This dataset represents the production of a 2’500 kg electronic component machinery used in the production of semiconductors, printed wiring boards, capacitors, etc. It is based on an average of: wafer marking system, laser blind-via drilling system and a IC trim system. Material data are taken from producer information of these machineries. Infrastructure and production efforts are based on own assumptions, for thus
This dataset represents the production of a 2’500 kg electronic component machinery used in the production of semiconductors, printed wiring boards, capacitors, etc. It is based on an average of: wafer marking system, laser blind-via drilling system and a IC trim system. Material data are taken from producer information of these machineries. Infrastructure and production efforts are based on own assumptions and have thus, accordingly higher uncertainties.

## Included activities start
From reception of raw materials at the factory gate.

## Included activities end
This module includes material, production efforts (transportation, energy, process chemicals, …) and infrastructure for the production of a machinery used in the production line for electronic components. No information about emissions (air, water) and waste are included.

## Geography
This module relates to the global situation.

## Technology
Average of three current machineries sold for the production of electronic components (see general comments).

## Reference product
- electronic component machinery, unspecified: 1 unit; By-product classification allocatable product; CPC 4492: Parts n.e.c. for special-purpose machinery
  EcoSpold01Location=GLO
  The dataset represents the various types of electronic component machineries used in the production of semiconductors, printed wiring boards, capacitors, etc.
  production volume 1 unit
    Dummy value to be replaced by measured, estimated or calculated value
  property price 18109 EUR2005
    Calculated based on inputs: The price of the product has been calculated as a sum of the values of the material and energy inputs for this product. This value is therefore a rough estimation. It may underestimate the real price since there are additional expenses when producing any product. These expences can include for example labour costs, treatment of waste materials and profit for the producer. Please consider carefully whether this level of data quality is acceptable for your application.
  properties: carbon allocation 0 kg, carbon content 0

## Inputs from technosphere
- cable, network cable, category 5, without plugs: 555.56 m; source GSI Group 2005; lognormal variance with pedigree 0.0761, pedigree (4,2,5,1,3)
  EcoSpold01Location=GLO
  Estimation, based on machines qualitative information from literature.
  Further references:
  GSI Group (2005b) WaferTrim M350. Download of February 13.
  GSI Lumonics (2004) DrillStar GS-800. Download of February 13.
  Uncertainty: estimation, based on qualitative information from such kind of machines
  properties: carbon content, fossil 0.203917, dry mass 0.036 kg, wet mass 0.036 kg
  note on carbon content, fossil: Calculated as the addition of C contents in the product composition. Then referred to 1 kg DM
- injection moulding: 200 kg; lognormal variance with pedigree 0.0761, pedigree (4,2,5,1,3)
  Proxy. Due to a lack of information about energy consumption material processing was used.
  EcoSpold01Location=RER
  Uncertainty: estimation, based on qualitative information from such kind of machines
- polyethylene, high density, granulate: 200 kg; source GSI Group 2005; lognormal variance with pedigree 0.0761, pedigree (4,2,5,1,3)
  EcoSpold01Location=RER
  Estimation, based on machines qualitative information from literature.
  Further references:
  GSI Group (2005b) WaferTrim M350. Download of February 13.
  GSI Lumonics (2004) DrillStar GS-800. Download of February 13.
  Uncertainty: estimation, based on qualitative information from such kind of machines
  properties: carbon content, fossil 0.857143, dry mass 1 kg, heating value, net 42.47 MJ, wet mass 1 kg
  note on carbon content, fossil: Polyethylene is formed out of a huge amount of ethylene monomers (C2H4) (ecoinvent v2.2 report 11_II). MW=28 g/mol
- printed wiring board, surface mounted, unspecified, Pb containing: 12 kg; source GSI Group 2005; lognormal variance with pedigree 0.0761, pedigree (4,2,5,1,3)
  (same comment as for cable, network cable, category 5, without plugs)
  properties: carbon content, fossil 0.132522, dry mass 1 kg, wet mass 1 kg
  note on carbon content, fossil: C content was calculated as the addition of C content in the PWB components
- printed wiring board, surface mounted, unspecified, Pb free: 28 kg; source GSI Group 2005; lognormal variance with pedigree 0.0761, pedigree (4,2,5,1,3)
  (same comment as for cable, network cable, category 5, without plugs)
  properties: carbon content, fossil 0.132522, dry mass 1 kg, wet mass 1 kg
- printed wiring board, through-hole mounted, unspecified, Pb containing: 12 kg; source GSI Group 2005; lognormal variance with pedigree 0.0761, pedigree (4,2,5,1,3)
  (same comment as for cable, network cable, category 5, without plugs)
  properties: carbon content, fossil 0.132522, dry mass 1 kg, wet mass 1 kg
- printed wiring board, through-hole mounted, unspecified, Pb free: 28 kg; source GSI Group 2005; lognormal variance with pedigree 0.0761, pedigree (4,2,5,1,3)
  Estimation, based on machines qualitative information from literature.
  Further references:
  GSI Group (2005b) WaferTrim M350. Download of February 13.
  GSI Lumonics (2004) DrillStar GS-800. Download of February 13.
  EcoSpold01Location=GLO
  Uncertainty: estimation, based on qualitative information from such kind of machines
  properties: carbon content, fossil 0.132522, dry mass 1 kg, wet mass 1 kg
- road vehicle factory: 9.0909e-7 unit; lognormal variance with pedigree 0.5761, pedigree (4,5,5,3,5)
  EcoSpold01Location=RER
  Proxy. Due to a lack of more specific information, the infrastructure module representing production of cars plant was used.
  Uncertainty: rough estimation of infrastructure
- section bar rolling, steel: 1760 kg; source GSI Group 2005; lognormal variance with pedigree 0.0761, pedigree (4,2,5,1,3)
  EcoSpold01Location=RER
  Proxy. Due to a lack of information about energy consumption material processing was used.
  Uncertainty: estimation, based on qualitative information from such kind of machines
- sheet rolling, chromium steel: 440 kg; source GSI Group 2005; lognormal variance with pedigree 0.0761, pedigree (4,2,5,1,3)
  (same comment as for section bar rolling, steel)
- steel, chromium steel 18/8, hot rolled: 440 kg; source GSI Group 2005; lognormal variance with pedigree 0.0761, pedigree (4,2,5,1,3)
  (same comment as for polyethylene, high density, granulate)
  properties: carbon content, fossil 0.0008, dry mass 1 kg, wet mass 1 kg
  note on carbon content, fossil: Stainless steel model is the grade 304 steel (18/8 stainless, 18% chromium 8% nickel; max. 0.08% C)
- steel, low-alloyed, hot rolled: 1760 kg; source GSI Group 2005; lognormal variance with pedigree 0.0761, pedigree (4,2,5,1,3)
  (same comment as for polyethylene, high density, granulate)
  properties: carbon content, fossil 0.005, dry mass 1 kg, wet mass 1 kg
  note on carbon content, fossil: Low alloyed steel composition given in Tab. 3.2 ecoinvent v2.2 report 10_partII. Steel assumed to have a C content of 0.5%

## Sampling procedure
Literature & own estimations

## Review by Rolf Frischknecht 2007-09-14
passed.

## Review by Roland Hischier 2011-09-20
Transfer of documentation done.
