# natural gas production, unprocessed, at extraction

Dataset: EcoSpold 2, unit process
Geography: GLO
Time period: 2000-01-01 to 2022-12-31
Technology level: current
Classification: ISIC rev.4 ecoinvent: 0620:Extraction of natural gas
Classification: EcoSpold01Categories: natural gas/production
Tags: ConvertedDataset
Scenario: Business-as-Usual
System model: Allocation at the point of substitution
Generated by: Thomas Heck
Published in: Faist Emmenegger, M. 2007
Database: ecoinvent
isCopyrightProtected: true

## General comment
Based on NREL data (NREL 2007)
[This dataset was already contained in the ecoinvent database version 2. It was not individually updated during the transfer to ecoinvent version 3. Life Cycle Impact Assessment results may still have changed, as they are affected by changes in the supply chain, i.e. in other datasets. This dataset was generated following the ecoinvent quality guidelines for version 2. It may have been subject to central changes described in the ecoinvent version 3 change report (http://www.ecoinvent.org/database/ecoinvent-version-3/reports-of-changes/), and the results of the central updates were reviewed extensively. The changes added e.g. consistent water flows and other information throughout the database. The documentation of this dataset can be found in the ecoinvent reports of version 2, which are still available via the ecoinvent website. The change report linked above covers all central changes that were made during the conversion process.]

## Included activities end
The dataset includes data for natural gas extracted from onshore and offshore wells. Furthermore, the dataset includes data for natural gas co-extracted with crude oil as well as for wells that produce only natural gas.

## Technology
Average technology.

## Reference product
- natural gas, unprocessed, at extraction: 1 m3; By-product classification allocatable product; CPC 12020: Natural gas, liquefied or in the gaseous state; CAS 14493-06-2
  EcoSpold01Location=RNA
  production volume 5.86875e11 m3
    75% of North American production (25% assumed to be co-produced with petroleum)
  property carbon content, fossil 0.602381
    An average C content of 0.506 kg C/ m3 has been assumed (this average has been calculated using data in Tab 3.5, ecoinvent v2.2 report 6_V
  property heating value, net 36 MJ
    Literature value, Source: Christoph Meili;Niels Jungbluth;Maresa Bussa (2021) Life cycle inventories of crude oil and natural gas extraction. ESU-services Ltd. commissioned by BAFU & VSG, Schaffhausen, Switzerland, http://esu-services.ch/data/public-lci-reports/
  property price 0.205 EUR2005
    Calculated value based on data from United Nations Commodity Trade Statistics Database (comtrade.un.org). UN comtrade category: 271121 Natural gas in gasesoues state. Year 2005. Using exchange rate of 1EURO = 1.209 USD. Average of price of import into 5 main markets (EU, US, JP, IN and CN).
  properties: carbon allocation 0.506 kg, carbon content 0.602381, carbon content, non-fossil 0, dry mass 0.84 kg, water content 0, water in wet mass 0 kg, wet mass 0.84 kg

## Inputs from technosphere
- electricity, medium voltage: 0.0288 kWh; lognormal variance with pedigree 0.082, pedigree (1,1,5,5,1)
  EcoSpold01Location=US
  NREL 2007
- natural gas, unprocessed, at extraction: 0.0241 m3; lognormal variance with pedigree 0.052, pedigree (1,1,5,5,1)
  NREL 2007. Losses. Linked to the activity itself.
  properties: carbon content, fossil 0.602381, dry mass 0.84 kg, heating value, net 36 MJ, wet mass 0.84 kg
  note on heating value, net: Literature value, Source: Christoph Meili;Niels Jungbluth;Maresa Bussa (2021) Life cycle inventories of crude oil and natural gas extraction. ESU-services Ltd. commissioned by BAFU & VSG, Schaffhausen, Switzerland, http://esu-services.ch/data/public-lci-reports/

## Inputs from nature
- Gas, natural [natural resource, in ground]: 1 Sm3; lognormal variance with pedigree 0.042, pedigree (1,1,5,5,1)
  NREL 2007

## Emissions to nature
- Methane, fossil [air, unspecified]: 0.00882 kg; lognormal variance with pedigree 0.342, pedigree (1,1,5,5,1)
  NREL 2007
- 4-Methyl-2-pentanone [water, unspecified]: 1.33e-8 kg; lognormal variance with pedigree 0.692, pedigree (1,1,5,5,1)
  NREL 2007
- Acetone [water, unspecified]: 3.17e-8 kg; lognormal variance with pedigree 0.692, pedigree (1,1,5,5,1)
  NREL 2007
- Acidity, unspecified [water, unspecified]: 6.67e-7 kg; lognormal variance with pedigree 0.692, pedigree (1,1,5,5,1)
  NREL 2007
- Aluminium III [water, unspecified]: 5.84e-5 kg; lognormal variance with pedigree 0.692, pedigree (1,1,5,5,1)
  NREL 2007
- Ammonium [water, unspecified]: 3.91e-5 kg; lognormal variance with pedigree 0.692, pedigree (1,1,5,5,1)
  NREL 2007
- Antimony ion [water, unspecified]: 3.57e-8 kg; lognormal variance with pedigree 0.692, pedigree (1,1,5,5,1)
  NREL 2007
- Arsenic ion [water, unspecified]: 7.01e-7 kg; lognormal variance with pedigree 0.692, pedigree (1,1,5,5,1)
  NREL 2007
- BOD5, Biological Oxygen Demand [water, unspecified]: 0.000552 kg; lognormal variance with pedigree 0.692, pedigree (1,1,5,5,1)
  NREL 2007
- Barium II [water, unspecified]: 0.000903 kg; lognormal variance with pedigree 0.692, pedigree (1,1,5,5,1)
  NREL 2007
- Benzene [water, unspecified]: 5.32e-6 kg; lognormal variance with pedigree 0.692, pedigree (1,1,5,5,1)
  NREL 2007
- Benzene, ethyl- [water, unspecified]: 2.99e-7 kg; lognormal variance with pedigree 0.692, pedigree (1,1,5,5,1)
  NREL 2007
- Beryllium II [water, unspecified]: 3.18e-8 kg; lognormal variance with pedigree 0.692, pedigree (1,1,5,5,1)
  NREL 2007
- Boron [water, unspecified]: 9.96e-6 kg; lognormal variance with pedigree 0.692, pedigree (1,1,5,5,1)
  NREL 2007
- Bromine [water, unspecified]: 0.00068 kg; lognormal variance with pedigree 0.692, pedigree (1,1,5,5,1)
  NREL 2007
- COD, Chemical Oxygen Demand [water, unspecified]: 0.000913 kg; lognormal variance with pedigree 0.692, pedigree (1,1,5,5,1)
  NREL 2007
- Cadmium II [water, unspecified]: 1.02e-7 kg; lognormal variance with pedigree 0.692, pedigree (1,1,5,5,1)
  NREL 2007
- Calcium II [water, unspecified]: 0.0102 kg; lognormal variance with pedigree 0.692, pedigree (1,1,5,5,1)
  NREL 2007
- Chloride [water, unspecified]: 0.115 kg; lognormal variance with pedigree 0.692, pedigree (1,1,5,5,1)
  NREL 2007
- Chromium III [water, unspecified]: 1.61e-6 kg; lognormal variance with pedigree 0.692, pedigree (1,1,5,5,1)
  NREL 2007
- Cobalt II [water, unspecified]: 7.03e-8 kg; lognormal variance with pedigree 0.692, pedigree (1,1,5,5,1)
  NREL 2007
- Copper ion [water, unspecified]: 4.48e-7 kg; lognormal variance with pedigree 0.692, pedigree (1,1,5,5,1)
  NREL 2007
- Cyanide [water, unspecified]: 2.29e-10 kg; lognormal variance with pedigree 0.692, pedigree (1,1,5,5,1)
  NREL 2007
- DOC, Dissolved Organic Carbon [water, unspecified]: 0.000338148 kg; lognormal variance with pedigree 0.692, pedigree (1,1,5,5,1)
  Calculated as equal to TOC.
- Dissolved solids [water, unspecified]: 0.141 kg; lognormal variance with pedigree 0.692, pedigree (1,1,5,5,1)
  NREL 2007
- Fluoride [water, unspecified]: 1.11e-9 kg; lognormal variance with pedigree 0.692, pedigree (1,1,5,5,1)
  NREL 2007
- Iron ion [water, unspecified]: 0.000184 kg; lognormal variance with pedigree 0.692, pedigree (1,1,5,5,1)
  NREL 2007
- Lead II [water, unspecified]: 1.01e-6 kg; lognormal variance with pedigree 0.692, pedigree (1,1,5,5,1)
  NREL 2007
- Lead-210 [water, unspecified]: 0.000918 kBq; lognormal variance with pedigree 0.692, pedigree (1,1,5,5,1)
  NREL 2007
- Lithium I [water, unspecified]: 0.00341 kg; lognormal variance with pedigree 0.692, pedigree (1,1,5,5,1)
  NREL 2007
- Magnesium [water, unspecified]: 0.00199 kg; lognormal variance with pedigree 0.692, pedigree (1,1,5,5,1)
  NREL 2007
- Manganese II [water, unspecified]: 3.22e-6 kg; lognormal variance with pedigree 0.692, pedigree (1,1,5,5,1)
  NREL 2007
- Mercury II [water, unspecified]: 6.23e-10 kg; lognormal variance with pedigree 0.692, pedigree (1,1,5,5,1)
  NREL 2007
- Molybdenum VI [water, unspecified]: 7.29e-8 kg; lognormal variance with pedigree 0.692, pedigree (1,1,5,5,1)
  NREL 2007
- Nickel II [water, unspecified]: 5.55e-7 kg; lognormal variance with pedigree 0.692, pedigree (1,1,5,5,1)
  NREL 2007
- Oils, unspecified [water, unspecified]: 6.09e-5 kg; lognormal variance with pedigree 0.692, pedigree (1,1,5,5,1)
  NREL 2007
- Phenol [water, unspecified]: 1.42e-6 kg; lognormal variance with pedigree 0.692, pedigree (1,1,5,5,1)
  NREL 2007
- Radium-226 [water, unspecified]: 0.0042 kBq; lognormal variance with pedigree 0.692, pedigree (1,1,5,5,1)
  NREL 2007
- Radium-228 [water, unspecified]: 0.00591 kBq; lognormal variance with pedigree 0.692, pedigree (1,1,5,5,1)
  NREL 2007
- Selenium IV [water, unspecified]: 7.05e-9 kg; lognormal variance with pedigree 0.692, pedigree (1,1,5,5,1)
  NREL 2007
- Silver I [water, unspecified]: 6.65e-6 kg; lognormal variance with pedigree 0.692, pedigree (1,1,5,5,1)
  NREL 2007
- Sodium I [water, unspecified]: 0.0323 kg; lognormal variance with pedigree 0.692, pedigree (1,1,5,5,1)
  NREL 2007
- Strontium [water, unspecified]: 0.000173 kg; lognormal variance with pedigree 0.692, pedigree (1,1,5,5,1)
  NREL 2007
- Sulfate [water, unspecified]: 0.000234 kg; lognormal variance with pedigree 0.692, pedigree (1,1,5,5,1)
  NREL 2007
- Sulfur [water, unspecified]: 8.41e-6 kg; lognormal variance with pedigree 0.692, pedigree (1,1,5,5,1)
  NREL 2007
- TOC, Total Organic Carbon [water, unspecified]: 0.000338148 kg; lognormal variance with pedigree 0.692, pedigree (1,1,5,5,1)
  Calculated by default as TOC (gC) = COD/2.7 (COD measured in g O2). Should more correctly be calculated from the carbon content of the specified emissions to water.
- Thallium I [water, unspecified]: 7.54e-9 kg; lognormal variance with pedigree 0.692, pedigree (1,1,5,5,1)
  NREL 2007
- Tin ion [water, unspecified]: 3.49e-7 kg; lognormal variance with pedigree 0.692, pedigree (1,1,5,5,1)
  NREL 2007
- Titanium ion [water, unspecified]: 5.48e-7 kg; lognormal variance with pedigree 0.692, pedigree (1,1,5,5,1)
  NREL 2007
- Toluene [water, unspecified]: 5.03e-6 kg; lognormal variance with pedigree 0.692, pedigree (1,1,5,5,1)
  NREL 2007
- Vanadium V [water, unspecified]: 8.62e-8 kg; lognormal variance with pedigree 0.692, pedigree (1,1,5,5,1)
  NREL 2007
- Xylene [water, unspecified]: 2.54e-6 kg; lognormal variance with pedigree 0.692, pedigree (1,1,5,5,1)
  NREL 2007
- Zinc II [water, unspecified]: 1.57e-6 kg; lognormal variance with pedigree 0.692, pedigree (1,1,5,5,1)
  NREL 2007
- m-Xylene [water, unspecified]: 9.61e-8 kg; lognormal variance with pedigree 0.692, pedigree (1,1,5,5,1)
  NREL 2007
- o-Xylene [water, unspecified]: 7e-8 kg; lognormal variance with pedigree 0.692, pedigree (1,1,5,5,1)
  NREL 2007

## Sampling procedure
Literature

## Extrapolations
none This dataset has been copied from an original dataset covering the geography RNA. The uncertainty has been adjusted accordingly.

## Review by Thomas Kägi 2007-09-01
passed
