# treatment of copper cake

Dataset: EcoSpold 2, unit process
Geography: GLO
Time period: 2012-01-01 to 2022-12-31
Technology level: current
Classification: ISIC rev.4 ecoinvent: 2420:Manufacture of basic precious and other non-ferrous metals
Scenario: Business-as-Usual
System model: Allocation at the point of substitution
Share of production covered: 84 %
Generated by: Ingo Meinshausen
Published in: Althaus H.-J. 2000
Database: ecoinvent
isCopyrightProtected: true

## General comment
This dataset represents the treatment of copper cake generated during the production hydrometallurgical primary zinc. The functional unit represents the treatment of 1.8382 kg of copper cake and the recovery of 1 kg of copper. This dataset is a copy of the ecoinvent v3.01 dataset 'copper production, primary, GLO 2003' used as proxy. The only differences being the change of reference product, copper cake instead of copper (which is now a by-product of the treatment process) and the removal of the copper concentrate input. Uncertainties have been adjusted accordinly. 'The product 'copper, primary, at refinery' is used as pure metal or as alloying element in various technical applications.' as cited in original dataset.

## Included activities end
'The module includes the pre-treatment of the ore, the reduction and the refining copper to cathode copper, including the country-specific share in hydrometalurgically won copper (SX-EW)' as cited in original dataset. The copper concentrate input has been however removed.

## Geography
'This module is valid for the whole corresponding region. Some agents used like lime or sodium cyanide originate from data sets valid for Switzerland or Europe.' as cited in original dataset.

## Technology
'The ore is pre-treated, reduced and refined according to the country specific mix of process alternatives: reverberatory furnace 23.7%; flash smelting furnaces 60.7%; other 6.2%.; SX-EW 9.4%. An overall abatement for sulphur dioxide of 45.4% was estimated.' as cited in original dataset.

## Parameters
- copper fraction recovery: 0.8 dimensionless; name copper_recovery_rate; lognormal variance with pedigree 0.0486, pedigree (5,5,1,1,1)
  Assumption, represents the copper recovery rate after copper cake treatment.
- fraction, process water, to air: 0.15 dimensionless; name fraction_PW_to_air; lognormal variance with pedigree 0.092025, pedigree (4,4,3,2,4)
  'Literature value. In case when no industry/process specific data are available, default evaporation fraction value is used. This value is 15% and is based on literature (Statistics Canada, 2007 & Shaffer, K.H., 2008, Consumptive water use in the Great Lakes Basin, USGS & Shiklomanov, 2003, World Water Resources at the Beginning of the 21st Century) and has been approved by an expert.' as cited in original dataset.

## Reference product
- copper, cathode: 1 kg; name copper_amount; By-product classification allocatable product; CPC 41413: Refined copper and copper alloys, unwrought; master alloys of copper; CAS 7440-50-8
  Was the reference flow of the original dataset.
  production volume 5.20135e7 kg
    Calculated from the production volume of copper in proportion to the respective output amounts.
  property price 3.57105 EUR2005
    Price calculated as 5-year market average (2015-2019; USD/kg; USGS [2020]) and converted to EUR2005 (USD2019/EUR2005 exchange rate: 0.62; Official Data Foundation [2020] and Macrotrends [2020]).
    References:
    Official Data Foundation (2020). Inflation Calculator [Online]. Available from: https://www.officialdata.org/us/inflation/2005?endYear=2019&amount=1 [Accessed 28/07/2020]
    USGS (2020). Mineral Commodity Summaries 2020 [Online]. Available from: https://pubs.usgs.gov/periodicals/mcs2020/mcs2020.pdf [Accessed 28/07/2020]
    Macrotrends (2020). Euro Dollar Exchange Rate (EUR USD) - Historical Chart [Online]. Available from: https://www.macrotrends.net/2548/euro-dollar-exchange-rate-historical-chart [Accessed 28/07/2020]
  properties: carbon allocation 0 kg, carbon content 0, carbon content, fossil 0, carbon content, non-fossil 0, dry mass 1 kg, water content 0, water in wet mass 0 kg, wet mass 1 kg

## Inputs from technosphere
- acetic acid, without water, in 98% solution state: 9.95651e-5 kg
- acrylic acid: 1.60683e-6, 7.62784e-6 kg (2 suppliers, which the file names only by identifier); sum of these 9.23467e-6 kg
- activated silica: 0.0031777 kg
- aluminium scrap, new: -6.24844e-5, -1.96553e-5 kg (2 suppliers, which the file names only by identifier); sum of these -8.21397e-5 kg
- aluminium scrap, post-consumer: -6.07115e-6 kg
- aluminium sulfate, powder: 4.40057e-5, 9.26997e-6 kg (2 suppliers, which the file names only by identifier); sum of these 5.32757e-5 kg
- aluminium, cast alloy: 0.000143131 kg
- aluminium, primary, ingot: 4.44212e-5 kg
- aluminium, wrought alloy: 0.00141484 kg
- ammonia, anhydrous, liquid: 0.00246419, 0.000258274, 0.00545355, 0.00135714, 0.00949202, 0.00126941, 0.00115458, 0.027314, 0.000815953 kg (9 suppliers, which the file names only by identifier); sum of these 0.0495791 kg
- ammonium chloride: 0.000867524 kg
- ammonium nitrate: 0.00130971, 0.00188846, 0.00100666, 0.00341731 kg (4 suppliers, which the file names only by identifier); sum of these 0.00762213 kg
- anode, for metal electrolysis: 5.86922e-5 kg
- antimony: 4.03828e-6 kg
- barium carbonate: 0.000103982 kg
- bentonite: 7.83796e-5 kg
- benzaldehyde: 0.00042065, 0.000207741 kg (2 suppliers, which the file names only by identifier); sum of these 0.000628391 kg
- blast furnace sludge: -0.00832455, -0.00486897, -0.054812, -0.00123696 kg (4 suppliers, which the file names only by identifier); sum of these -0.0692424 kg
- butane: 3.2507e-5 kg
- calcium chloride: 8.70293e-5, 0.000301412 kg (2 suppliers, which the file names only by identifier); sum of these 0.000388441 kg
- carbon dioxide, liquid: 0.0435673, 0.00917104 kg (2 suppliers, which the file names only by identifier); sum of these 0.0527383 kg
- carbon disulfide: 0.000413352 kg
- cement, Portland: 0.00145882 kg
- cement, unspecified: 0.00363906, 1.36535e-5, 8.93071e-6, 5.13275e-6, 0.000361357, 9.51502e-5, 1.13426e-5, 5.79847e-5, 0.000218927 kg (9 suppliers, which the file names only by identifier); sum of these 0.00441153 kg
- charcoal: 8.32784e-6 kg
- chemical, inorganic: 0.000234825 kg
- chemical, organic: 0.00499827 kg
- chlorine, gaseous: 0.000549899, 0.000111647 kg (2 suppliers, which the file names only by identifier); sum of these 0.000661546 kg
- chlorine, liquid: 0.000621968, 0.000124417 kg (2 suppliers, which the file names only by identifier); sum of these 0.000746385 kg
- clinker: 0.000286276, 6.64029e-5, 0.0040753, 0.00127019, 0.0013591, 2.07241e-5, 8.5126e-5, 5.09477e-5 kg (8 suppliers, which the file names only by identifier); sum of these 0.00721406 kg
- coke: 0.605287 MJ
- compressed air, 800 kPa gauge: 0.140419, 0.0571395 m3 (2 suppliers, which the file names only by identifier); sum of these 0.197559 m3
- copper cake: -0.0590193 kg
- copper scrap, sorted, pressed: -1.66839e-5 kg
- copper sulfate: 9.29447e-5 kg
- copper, cathode: 1.62651e-5 kg
- diesel: 0.0541142, 0.000412433 kg (2 suppliers, which the file names only by identifier); sum of these 0.0545266 kg
- diesel, burned in building machine: 0.92132 MJ
- diesel, burned in diesel-electric generating set, 10MW: 0.161684 MJ
- electricity, high voltage: 0.0929622 kWh
- electricity, medium voltage: 0.0161046, 0.456394, 0.711826, 0.113957, 0.462044, 0.0459798, 0.112343, 0.111601, 0.214728, 0.282322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 kWh (14 suppliers, which the file names only by identifier); sum of these 3.64846 kWh
- electricity, medium voltage, cobalt industry: 32.1947 kWh
- esterquat: 3.7781e-7, 7.52089e-7 kg (2 suppliers, which the file names only by identifier); sum of these 1.1299e-6 kg
- ethanol, without water, in 99.7% solution state, from ethylene: 0.000107815, 0.00024007 kg (2 suppliers, which the file names only by identifier); sum of these 0.000347884 kg
- ethoxylated alcohol (AE11): 6.12999e-6 kg
- ethylene glycol: 1.02036e-5 kg
- explosive, tovex: 0.00177592 kg
- ferrite: 0.000701913 kg
- foaming agent: 5.81831e-7 kg
- hard coal: 0.00316441, 0.0041988, 0.00190388, 0.00117594, 0.0146956, 0.00194287, 0.00148234, 0.000890541, 0.000826225, 0.000451778 kg (10 suppliers, which the file names only by identifier); sum of these 0.0307324 kg
- hazardous waste, for incineration: -0.00225975, -0.0010867, -2.84058e-5 kg (3 suppliers, which the file names only by identifier); sum of these -0.00337486 kg
- hazardous waste, for underground deposit: -0.010325, -0.000659603 kg (2 suppliers, which the file names only by identifier); sum of these -0.0109846 kg
- heat, central or small-scale, other than natural gas: 2.44584e-6 MJ
- heat, district or industrial, natural gas: 8.05191, 0.126457, 0.0288577 MJ (3 suppliers, which the file names only by identifier); sum of these 8.20722 MJ
- heat, district or industrial, other than natural gas: 0.000206059, 0.00454352, 0.00701999, 3.74126, 0.000158741 MJ (5 suppliers, which the file names only by identifier); sum of these 3.75319 MJ
- heavy fuel oil: 0.0519547, 0.000437176, 0.00222252, 0.00288184, 0.000560832, 0.000750757, 0.0107038 kg (7 suppliers, which the file names only by identifier); sum of these 0.0695116 kg
- hot rolling, steel: 0.000128319 kg
- hydrochloric acid, without water, in 30% solution state: 0.0023097, 0.0103425 kg (2 suppliers, which the file names only by identifier); sum of these 0.0126522 kg
- hydrogen peroxide, without water, in 50% solution state: 0.000767909, 0.00016174 kg (2 suppliers, which the file names only by identifier); sum of these 0.000929648 kg
- hydrogen sulfide: 0.0147636, 0.00311001 kg (2 suppliers, which the file names only by identifier); sum of these 0.0178736 kg
- hydrogen, liquid: 0.000711556, 0.00334758 kg (2 suppliers, which the file names only by identifier); sum of these 0.00405914 kg
- inert waste: -2.17512, -0.0187336, -7.66701 kg (3 suppliers, which the file names only by identifier); sum of these -9.86086 kg
- iron sulfate: 0.000293385, 0.000144891 kg (2 suppliers, which the file names only by identifier); sum of these 0.000438275 kg
- iron(III) chloride, without water, in 14% iron solution state: 6.09992e-5 kg
- iron(III) sulfate, without water, in 12.5% iron solution state: 0.000254179 kg
- isobutanol: 1.57721e-5, 3.80077e-5 kg (2 suppliers, which the file names only by identifier); sum of these 5.37798e-5 kg
- kerosene: 1.91146e-6, 0.000323326, 1.14535e-5, 6.61696e-5, 3.63368e-5, 2.42702e-6, 4.70364e-6, 3.11322e-6 kg (8 suppliers, which the file names only by identifier); sum of these 0.000449441 kg
- leach residue from copper production: -0.177276 kg
- lead: 0.000401325 kg
- lead concentrate: 0.0181477 kg
- light fuel oil: 0.00167597, 0.00106414, 0.000166353, 1.59951e-5, 0.000359823, 1.1887e-5, 1.1039e-5, 8.24249e-5 kg (8 suppliers, which the file names only by identifier); sum of these 0.00338763 kg
- lime, hydrated, loose weight: 8.3266e-5, 0.00980933 kg (2 suppliers, which the file names only by identifier); sum of these 0.0098926 kg
- lime, hydrated, packed: 0.00309777, 2.62949e-5 kg (2 suppliers, which the file names only by identifier); sum of these 0.00312406 kg
- limestone, crushed, for mill: 0.0116442, 4.6686e-5, 9.96844e-5 kg (3 suppliers, which the file names only by identifier); sum of these 0.0117905 kg
- limestone, crushed, washed: 0.264532, 0.00225555 kg (2 suppliers, which the file names only by identifier); sum of these 0.266788 kg
- limestone, unprocessed: 0.000973243, 1.00755e-5, 0.0246405 kg (3 suppliers, which the file names only by identifier); sum of these 0.0256239 kg
- liquefied petroleum gas: 0.000203493 kg
- lubricating oil: 0.000211487, 4.43056e-5 kg (2 suppliers, which the file names only by identifier); sum of these 0.000255793 kg
- magnesium: 6.22461e-6 kg
- magnesium oxide: 0.00894591 kg
- manganese dioxide: 0.00129851 kg
- manganese sulfate: 4.60124e-5 kg
- meat and bone meal: 2.97581e-6, 5.01734e-9 kg (2 suppliers, which the file names only by identifier); sum of these 2.98082e-6 kg
- municipal solid waste: -0.130153, -0.028884, -7.00948e-5, -0.000102309, -6.27079e-7, -0.00123163, -4.38806e-7 kg (7 suppliers, which the file names only by identifier); sum of these -0.160442 kg
- naphtha: 0.000914704, 0.0431208, 0.00699372, 0.00189695, 7.30325e-5, 0.0003014, 0.00962666 kg (7 suppliers, which the file names only by identifier); sum of these 0.0629273 kg
- natural gas, high pressure: 2.14762e-5, 9.06515e-6, 5.19186e-5, 1.54075e-5, 0.000871613, 8.90857e-5, 0.00036615, 9.72444e-6, 2.86954e-7, 3.453e-5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 m3 (28 suppliers, which the file names only by identifier); sum of these 0.0343338 m3
- natural gas, low pressure: 0.00634787, 0.00227953, 0.00190489, 0.00494427, 0.00468043, 0.0972584, 0.00478597, 0.00415804, 0.000918146, 0.0446725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 m3 (14 suppliers, which the file names only by identifier); sum of these 0.180097 m3
- nickel smelter slag: -1.20085 kg
- nitric acid, without water, in 50% solution state: 2.14476e-6, 2.79018e-5, 3.18679e-6, 7.92495e-6, 1.03062e-5, 3.79722e-6, 1.306e-5, 3.44304e-6, 3.17499e-6, 2.41962e-5 kg (10 suppliers, which the file names only by identifier); sum of these 9.91358e-5 kg
- nitrogen, liquid: 0.0054196, 0.00773901, 0.00212431 kg (3 suppliers, which the file names only by identifier); sum of these 0.0152829 kg
- non-sulfidic overburden, off-site: -7.36117 kg
- oxygen, liquid: 0.145235, 0.0147794 kg (2 suppliers, which the file names only by identifier); sum of these 0.160015 kg
- paraffin: 5.09565e-7 kg
- perlite: 1.79178e-6 kg
- petrol, unleaded: 5.29271e-7, 6.09433e-5, 1.98e-6, 2.31088e-5, 2.19449e-6, 5.30996e-7, 1.09026e-7 kg (7 suppliers, which the file names only by identifier); sum of these 8.93959e-5 kg
- petroleum coke: 0.0286025 kg
- phosphoric acid, industrial grade, without water, in 85% solution state: 4.03934e-5 kg
- pig iron: 7.24849e-5, 0.000782585 kg (2 suppliers, which the file names only by identifier); sum of these 0.00085507 kg
- polyacrylamide: 0.00110037 kg
- potassium hydroxide: 0.000358711 kg
- potassium permanganate: 1.47676e-5 kg
- precious metal refinery: 1.51063e-12 unit
- process-specific burdens, inert material landfill: 0.0410693, 0.00034861 kg (2 suppliers, which the file names only by identifier); sum of these 0.0414179 kg
- propane: 0.0514434 kg
- pyridine: 5.17452e-6 kg
- quicklime, in pieces, loose: 0.00642829, 1.06382e-7 kg (2 suppliers, which the file names only by identifier); sum of these 0.0064284 kg
- quicklime, milled, loose: 0.000365148, 0.0446294 kg (2 suppliers, which the file names only by identifier); sum of these 0.0449945 kg
- refinery sludge: -0.000835488, -0.00805455, -3.82292e-5 kg (3 suppliers, which the file names only by identifier); sum of these -0.00892826 kg
- retention aid, for paper production: 1.3611e-5 kg
- section bar extrusion, aluminium: 2.4161e-6 kg
- sheet rolling, aluminium: 4.44212e-5 kg
- silica sand: 0.0768842 kg
- silver: 1.09767e-6 kg
- soda ash, dense: 0.00457099 kg
- sodium chloride, powder: 0.000233548 kg
- sodium dichromate: 1.01672e-5 kg
- sodium dithionite, anhydrous: 2.04592e-5 kg
- sodium hydrogen sulfite: 8.95632e-7 kg
- sodium hydrosulfide: 0.00103845 kg
- sodium hydroxide, without water, in 50% solution state: 1.12944e-5, 0.0461994 kg (2 suppliers, which the file names only by identifier); sum of these 0.0462107 kg
- sodium hypochlorite, without water, in 15% solution state: 3.37491e-6, 1.60211e-5 kg (2 suppliers, which the file names only by identifier); sum of these 1.9396e-5 kg
- sodium percarbonate, powder: 0.00450465, 0.00912134 kg (2 suppliers, which the file names only by identifier); sum of these 0.013626 kg
- sodium persulfate: 0.000676804 kg
- sodium phosphate: 8.79274e-10, 1.85222e-10 kg (2 suppliers, which the file names only by identifier); sum of these 1.0645e-9 kg
- sodium silicate, without water, in 37% solution state: 1.18377e-5, 5.59846e-6 kg (2 suppliers, which the file names only by identifier); sum of these 1.74362e-5 kg
- sodium sulfate, anhydrite: 0.00123973, 0.000202491 kg (2 suppliers, which the file names only by identifier); sum of these 0.00144222 kg
- sodium sulfide: 3.66125e-5 kg
- sodium tetrahydridoborate: 6.10753e-8 kg
- spent solvent mixture: -7.23043e-9, -6.61896e-11, -2.82518e-9 kg (3 suppliers, which the file names only by identifier); sum of these -1.01218e-8 kg
- steam, in chemical industry: 1.39202e-6, 7.89517e-6 kg (2 suppliers, which the file names only by identifier); sum of these 9.28719e-6 kg
- steel, low-alloyed: 0.0118215 kg
- strontium carbonate: 0.000389677 kg
- sulfamic acid: 2.31071e-7 kg
- sulfidic tailings, from zinc-lead mine operation: -9.8504e-5, -1.76925e-5, -1.38671e-5, -3.33766e-5, -5.0304e-6, -1.21456e-5, -5.66542e-5, -2.57258e-5 kg (8 suppliers, which the file names only by identifier); sum of these -0.000262996 kg
- sulfidic tailings, generic: -1.96614 kg
- sulfite pulp, bleached: 0.000471716 kg
- sulfur: 0.00202009 kg
- sulfur dioxide, liquid: 0.00124441, 0.00309754 kg (2 suppliers, which the file names only by identifier); sum of these 0.00434195 kg
- sulfuric acid: 0.546535, 0.0714983 kg (2 suppliers, which the file names only by identifier); sum of these 0.618034 kg
- tap water: 8.08953, 0.00410335, 0.000162728, 0.0350637, 0.000303642, 0.0469567, 0.000106748, 0.000817989 kg (8 suppliers, which the file names only by identifier); sum of these 8.17704 kg
- transport, freight train: 0.540896, 0.00684355 metric ton*km (2 suppliers, which the file names only by identifier); sum of these 0.54774 metric ton*km
- transport, freight, inland waterways, barge: 0.00911845, 0.0173573 metric ton*km (2 suppliers, which the file names only by identifier); sum of these 0.0264758 metric ton*km
- transport, freight, lorry 16-32 metric ton, EURO3: 0.00483549, 0.0199875, 0.0448333 metric ton*km (3 suppliers, which the file names only by identifier); sum of these 0.0696563 metric ton*km
- transport, freight, lorry 16-32 metric ton, EURO4: 0.119745, 0.0142361 metric ton*km (2 suppliers, which the file names only by identifier); sum of these 0.133981 metric ton*km
- transport, freight, lorry 3.5-7.5 metric ton, EURO3: 3.91986e-7 metric ton*km
- transport, freight, lorry >32 metric ton, EURO3: 0.00252496 metric ton*km
- transport, freight, lorry >32 metric ton, EURO4: 0.805476, 0.0938416 metric ton*km (2 suppliers, which the file names only by identifier); sum of these 0.899317 metric ton*km
- transport, freight, lorry, unspecified: 2.07483e-6 metric ton*km
- transport, freight, sea, bulk carrier for dry goods: 2.20746 metric ton*km
- transport, freight, sea, container ship: 0.031155 metric ton*km
- transport, passenger car, large size, petrol, EURO 3: 1.89268e-5 km
- urea: 1.52158e-6, 9.70502e-6, 8.31867e-7, 8.2874e-6 kg (4 suppliers, which the file names only by identifier); sum of these 2.03459e-5 kg
- waste glass: -6.09341e-6, -4.74753e-8, -1.1372e-7, -1.23383e-6, -1.06099e-8, -2.3437e-6, -1.61117e-8, -1.1666e-5, -2.57991e-9 kg (9 suppliers, which the file names only by identifier); sum of these -2.15274e-5 kg
- waste gypsum: -7.86899e-6, -0.000166466, -0.000541987 kg (3 suppliers, which the file names only by identifier); sum of these -0.000716322 kg
- waste mineral oil: -2.83766e-5, -0.00300128, -1.28408e-6, -0.00114625 kg (4 suppliers, which the file names only by identifier); sum of these -0.00417719 kg
- waste paper, unsorted: -2.33063e-6, -4.1433e-6, -2.33063e-6 kg (3 suppliers, which the file names only by identifier); sum of these -8.80457e-6 kg
- waste paperboard: -4.52234e-8, -2.94954e-8, -5.50145e-6, -2.96149e-7, -7.27303e-7, -1.59339e-8, -1.63411e-7, -3.95437e-9 kg (8 suppliers, which the file names only by identifier); sum of these -6.78292e-6 kg
- waste plastic, mixture: -9.81113e-6, -2.26684e-7 kg (2 suppliers, which the file names only by identifier); sum of these -1.00378e-5 kg
- waste polyethylene terephthalate: -3.87006e-8, -4.97847e-10, -1.23233e-9, -4.46537e-8, -2.25644e-10, -1.17021e-9, -3.12601e-7, -2.98359e-9 kg (8 suppliers, which the file names only by identifier); sum of these -4.02065e-7 kg
- waste textile, soiled: -0.00317478, -4.75182e-5 kg (2 suppliers, which the file names only by identifier); sum of these -0.00322229 kg
- waste wood, untreated: -1.68921e-7, -1.54992e-6, -2.31047e-6, -0.000247741, -9.80395e-7, -2.93668e-5, -6.48942e-6, -1.86081e-5 kg (8 suppliers, which the file names only by identifier); sum of these -0.000307215 kg
- wastewater, average: -0.000465779, -0.000275826, -0.0775078, -0.0185337 m3 (4 suppliers, which the file names only by identifier); sum of these -0.0967831 m3
- water, decarbonised: 3.0407, 0.405181, 0.0804487, 0.000253391, 0.399061, 0.0198918, 0.264531, 2.58114, 1.63419, 0.484749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 kg (13 suppliers, which the file names only by identifier); sum of these 9.28857 kg
- water, deionised: 0.0131593, 3.6556, 11.8672 kg (3 suppliers, which the file names only by identifier); sum of these 15.536 kg
- water, harvested from rainwater: 0.0327405 kg
- zinc: 0.00252238 kg
- zinc concentrate: 1.6594 kg
- zinc oxide: 0.0415886 kg
- zinc slag: -0.203073 kg

## Inputs from nature
- Aluminium [natural resource, in ground]: 0.117308 kg
- Arsenic [natural resource, in ground]: 0.000286881 kg
- Calcium [natural resource, in ground]: 0.0180735 kg
- Chromium [natural resource, in ground]: 0.0397198 kg
- Cobalt [natural resource, in ground]: 0.0133069 kg
- Copper [natural resource, in ground]: 0.280994 kg
- Gangue [natural resource, in ground]: 5.86497 kg
- Gold [natural resource, in ground]: 8.60691e-9 kg
- Iron [natural resource, in ground]: 3.95642 kg
- Lead [natural resource, in ground]: 0.000286881 kg
- Magnesium [natural resource, in ground]: 0.185092 kg
- Manganese [natural resource, in ground]: 0.0214377 kg
- Nickel [natural resource, in ground]: 0.152542 kg
- Occupation, inland waterbody, unspecified [natural resource, land]: 7.93083e-5 m2*year
- Silicon [natural resource, in ground]: 0.722135 kg
- Silver [natural resource, in ground]: 1.54924e-7 kg
- Sulfur [natural resource, in ground]: 2.07385 kg
- Transformation, from unspecified [natural resource, land]: 7.93083e-7 m2
- Transformation, to inland waterbody, unspecified [natural resource, land]: 7.93083e-7 m2
- Water, cooling, unspecified natural origin [natural resource, in water]: 0.0446131 m3
- Water, lake [natural resource, in water]: 0.00253806 m3
- Water, river [natural resource, in water]: 0.0271996 m3
- Water, salt, ocean [natural resource, in water]: 2.46628e-5 m3
- Water, unspecified natural origin [natural resource, in water]: 0.294824 m3
- Water, well, in ground [natural resource, in water]: 0.00158727 m3
- Zinc [natural resource, in ground]: 0.000573762 kg

## Emissions to nature
- Acetic acid [air, unspecified]: 3.22006e-9 kg
- Ammonia [air, unspecified]: 4.05463e-5 kg
- Antimony ion [air, unspecified]: 6.97744e-8 kg
- Arsenic ion [air, non-urban air or from high stacks]: 1.80531e-9 kg
- Arsenic ion [air, unspecified]: 5.06698e-6 kg
- Benzene [air, unspecified]: 1.19603e-8 kg
- Benzo(a)pyrene [air, unspecified]: 7.66545e-13 kg
- Cadmium II [air, non-urban air or from high stacks]: 9.20666e-9 kg
- Cadmium II [air, unspecified]: 5.01471e-6 kg
- Calcium [air, unspecified]: 8.68654e-7 kg
- Carbon dioxide, fossil [air, non-urban air or from high stacks]: 0.000302112 kg
- Carbon dioxide, fossil [air, unspecified]: 0.480775 kg
- Carbon dioxide, non-fossil [air, unspecified]: 2.02239e-5 kg
- Carbon monoxide, fossil [air, non-urban air or from high stacks]: 1.16984e-6 kg
- Carbon monoxide, fossil [air, unspecified]: 0.000228649 kg
- Chlorine [air, unspecified]: 4.25866e-7 kg
- Chromium III [air, unspecified]: 0.00127985 kg
- Cobalt II [air, unspecified]: 3.54279e-6 kg
- Copper ion [air, non-urban air or from high stacks]: 1.53325e-8 kg
- Copper ion [air, unspecified]: 7.93257e-5 kg
- Dinitrogen monoxide [air, unspecified]: 1.27341e-5 kg
- Dioxins, measured as 2,3,7,8-tetrachlorodibenzo-p-dioxin [air, non-urban air or from high stacks]: 1.28408e-16 kg
- Dioxins, measured as 2,3,7,8-tetrachlorodibenzo-p-dioxin [air, unspecified]: 4.14379e-15 kg
- Formaldehyde [air, unspecified]: 5.16466e-8 kg
- Hydrocarbons, unspecified [air, non-urban air or from high stacks]: 2.5907e-6 kg
- Hydrochloric acid [air, unspecified]: 1.07149e-6 kg
- Hydrogen [air, unspecified]: 0.0778628 kg
- Hydrogen sulfide [air, unspecified]: 6.77975e-6 kg
- Lead II [air, non-urban air or from high stacks]: 1.39015e-8 kg
- Lead II [air, unspecified]: 3.71546e-5 kg
- Manganese II [air, unspecified]: 4.83367e-8 kg
- Mercury II [air, non-urban air or from high stacks]: 1.75396e-9 kg
- Mercury II [air, unspecified]: 6.83477e-7 kg
- Methane, fossil [air, unspecified]: 5.95751e-6 kg
- Molybdenum VI [air, unspecified]: 2.62006e-10 kg
- NMVOC, non-methane volatile organic compounds [air, unspecified]: 8.05278e-6 kg
- Nickel II [air, unspecified]: 5.06012e-5 kg
- Nitrogen [air, unspecified]: 0.0012619 kg
- Nitrogen oxides [air, non-urban air or from high stacks]: 3.17437e-6 kg
- Nitrogen oxides [air, unspecified]: 0.00872255 kg
- PAH, polycyclic aromatic hydrocarbons [air, unspecified]: 1.58436e-10 kg
- Particulate Matter, < 2.5 um [air, non-urban air or from high stacks]: 4.23315e-6 kg
- Particulate Matter, < 2.5 um [air, unspecified]: 1.76713e-5 kg
- Particulate Matter, > 10 um [air, non-urban air or from high stacks]: 6.18952e-7 kg
- Particulate Matter, > 10 um [air, unspecified]: 0.00184191 kg
- Particulate Matter, > 2.5 um and < 10um [air, non-urban air or from high stacks]: 6.47412e-7 kg
- Particulate Matter, > 2.5 um and < 10um [air, unspecified]: 0.00198147 kg
- Selenium IV [air, unspecified]: 4.63298e-7 kg
- Silver I [air, unspecified]: 5.24014e-10 kg
- Sulfur dioxide [air, non-urban air or from high stacks]: 0.000403214 kg
- Sulfur dioxide [air, unspecified]: 0.0178041 kg
- Sulfur oxides [air, unspecified]: 2.45304e-5 kg
- Sulfur trioxide [air, unspecified]: 0.000864449 kg
- Sulfuric acid [air, non-urban air or from high stacks]: 4.12369e-6 kg
- Sulfuric acid [air, unspecified]: 4.35039e-5 kg
- VOC, volatile organic compounds [air, unspecified]: 3.74967e-5 kg
- Vanadium V [air, unspecified]: 1.58226e-9 kg
- Water [air, unspecified]: 0.0541765 m3
- Zinc II [air, non-urban air or from high stacks]: 1.65883e-6 kg
- Zinc II [air, unspecified]: 5.60454e-5 kg
- Sulfur [soil, industrial]: 0.0162937 kg
- Acidity, unspecified [water, surface water]: 3.41506e-7 kg
- Aluminium III [water, surface water]: 3.41389e-7 kg
- Ammonium [water, ocean]: 4.91301e-6 kg
- Ammonium [water, surface water]: 2.14485e-5 kg
- Antimony ion [water, surface water]: 8.32905e-7 kg
- Arsenic ion [water, ocean]: 1.54166e-7 kg
- Arsenic ion [water, surface water]: 1.45811e-7 kg
- BOD5, Biological Oxygen Demand [water, surface water]: 3.21491e-5 kg
- COD, Chemical Oxygen Demand [water, ocean]: 1.0479e-5 kg
- COD, Chemical Oxygen Demand [water, surface water]: 6.54936e-5 kg
- Cadmium II [water, ocean]: 9.46787e-8 kg
- Cadmium II [water, surface water]: 1.10435e-7 kg
- Calcium II [water, surface water]: 5.4075e-5 kg
- Chloride [water, surface water]: 0.00016418 kg
- Chromium III [water, surface water]: 6.20086e-10 kg
- Chromium VI [water, surface water]: 3.76829e-10 kg
- Cobalt II [water, ocean]: 5.71647e-7 kg
- Cobalt II [water, surface water]: 4.47796e-6 kg
- Copper ion [water, ocean]: 1.56322e-7 kg
- Copper ion [water, surface water]: 2.05989e-6 kg
- Cyanide [water, ocean]: 2.72183e-9 kg
- Cyanide [water, surface water]: 5.36621e-9 kg
- DOC, Dissolved Organic Carbon [water, surface water]: 1.84856e-5 kg
- Dissolved solids [water, surface water]: 3.36791e-6 kg
- Fluoride [water, ocean]: 4.28124e-6 kg
- Fluoride [water, surface water]: 6.33064e-6 kg
- Hydrogen sulfide [water, surface water]: 2.11979e-7 kg
- Iron ion [water, ocean]: 2.79749e-5 kg
- Iron ion [water, surface water]: 2.10786e-6 kg
- Lead II [water, ocean]: 6.26493e-8 kg
- Lead II [water, surface water]: 5.42757e-7 kg
- Magnesium [water, surface water]: 0.000132824 kg
- Manganese II [water, surface water]: 1.29011e-5 kg
- Mercury II [water, ocean]: 1.04131e-8 kg
- Mercury II [water, surface water]: 1.30205e-8 kg
- Nickel II [water, ocean]: 8.0553e-7 kg
- Nickel II [water, surface water]: 2.03431e-6 kg
- Nitrate [water, ocean]: 6.12411e-7 kg
- Nitrate [water, surface water]: 3.04173e-5 kg
- Nitrogen [water, ocean]: 0.000319937 kg
- Nitrogen [water, surface water]: 1.38328e-9 kg
- Nitrogen dioxide [water, surface water]: 3.46607e-8 kg
- Phenol [water, surface water]: 2.07964e-9 kg
- Phosphorus [water, surface water]: 3.29725e-7 kg
- Selenium IV [water, surface water]: 6.66907e-8 kg
- Sodium I [water, surface water]: 0.00021239 kg
- Sulfate [water, surface water]: 0.00112373 kg
- Sulfuric acid [water, surface water]: 0.0010086 kg
- Suspended solids, unspecified [water, surface water]: 0.000249505 kg
- TOC, Total Organic Carbon [water, surface water]: 1.84856e-5 kg
- Thallium I [water, ocean]: 2.81929e-8 kg
- Water [water, surface water]: 0.00450696 m3
- Water [water, unspecified]: 0.298955 m3
- Zinc II [water, ocean]: 2.47886e-6 kg
- Zinc II [water, surface water]: 4.8282e-6 kg

## Sampling procedure
'literature' as cited in original dataset.

## Extrapolations
'see Geography and Technology' as cited in original dataset.
