# application of plant protection product, by field sprayer

Dataset: EcoSpold 2, unit process
Geography: ZA
Time period: 2016-01-01 to 2022-12-31
Technology level: current
Classification: EcoSpold01Categories: agricultural means of production/work processes
Classification: ISIC rev.4 ecoinvent: 0161:Support activities for crop production
Scenario: Business-as-Usual
System model: Allocation at the point of substitution
Generated by: Ilhaam Patel
Published in: Nemecek, T. 2007
Database: ecoinvent
isCopyrightProtected: true

## General comment
Trailed field sprayer (pulled by tractor), 15 m working width, 800 l carrying capacity, plant protection product not included. FU is one ha treated crop.

Child dataset exchanges scaled from GLO parent dataset based on diesel consumption in South Africa. Created to proxy farm machinery/fieldwork representative of the South African context. Data quality indicators adjusted accordingly. Sulphur dioxide emissions adapted to be representative of South African diesel composition, typically 500ppm sulphur. Other difference with the parent dataset is the production volume, which now represents the production volume in South Africa.

Warning: If the parent value for diesel consumption (in the GLO parent dataset) is changed in future edition, the user must change the parameter ""ecoinvent diesel consumption"" accordingly in order to get the right ratio of ZA/ecoinvent diesel consumption."

## Included activities end
The inventory takes into account the diesel fuel consumption and the amount of agricultural machinery and of the shed, which has to be attributed to the application of plant protection. Also taken into consideration is the amount of emissions to the air from combustion and the emission to the soil from tyre abrasion during the work process. The following activities where considered part of the work process: preliminary work at the farm, like attaching the adequate machine to the tractor; transfer to field (with an assumed distance of 1 km); field work (for a parcel of land of 1 ha surface); transfer to farm and concluding work, like uncoupling the machine. The overlapping during the field work is considered. The amount of sprayed plant protection products is not taken into account. Not included are dust other than from combustion and noise.

## Geography
The inventories are based on measurements made by the FAT, in Switzerland.

## Technology
Current state of the art in South Africa

## Parameters
- scaling factor: 0.909091 dimensionless; name scaling_factor; = 1.6/1.76; lognormal variance with pedigree 0.044, pedigree (1,4,5,5,1)
  Factor used to scale emissions with respect to changes in diesel consumption.

## Reference product
- application of plant protection product, by field sprayer: 1 ha; By-product classification allocatable product; CPC 86119: Other support services to crop production
  EcoSpold01Location=CH
  production volume 2.5826e7 ha
    FAOSTAT data year 2014: area of arable land (12,500 thousand hectares) and permanent crops (413 thousand hectares). 2 applications per year assumed (own estimation)
  property price 3.15263 EUR2005
    Calculated based on inputs: The price of the product has been calculated as a sum of the values of the material and energy inputs for this product. This value is therefore a rough estimation. It may underestimate the real price since there are additional expenses when producing any product. These expences can include for example labour costs, treatment of waste materials and profit for the producer. Please consider carefully whether this level of data quality is acceptable for your application.
  properties: carbon allocation 0 kg, carbon content 0

## Inputs from technosphere
- agricultural machinery, unspecified: 0.53 kg; lognormal variance with pedigree 0.044, pedigree (1,4,5,5,1)
  Estimate is not geography specific. Same value as "application f plant protection product, by field sprayer, GLO"
  EcoSpold01Location=CH
- diesel: 1.6 kg; name diesel_consumption; lognormal variance with pedigree 0.042025, pedigree (1,4,5,2,1)
  Scaled to South African diesel consumption.
  EcoSpold01Location=CH
  properties: carbon content, fossil 0.865, dry mass 1 kg, heating value, net 42.8 MJ, wet mass 1 kg
  note on carbon content, fossil: C-content of diesel is 86.5% (ecoinvent v2.2 report 6_IV, Tab 3.14)
- shed: 0.00198 m2; lognormal variance with pedigree 0.344, pedigree (1,4,5,5,1)
  EcoSpold01Location=CH
  Estimate is not geography specific. Same value as "application f plant protection product, by field sprayer, GLO"
- tractor, 4-wheel, agricultural: 0.321 kg; lognormal variance with pedigree 0.044, pedigree (1,4,5,5,1)
  (same comment as for agricultural machinery, unspecified)

## Emissions to nature
- Ammonia [air, non-urban air or from high stacks]: 3.20909e-5 kg; = 3.53E-05*scaling_factor; lognormal variance with pedigree 0.098125, pedigree (1,2,5,2,3)
  Scaled to South African diesel consumption.
- Benzene [air, non-urban air or from high stacks]: 1.17273e-5 kg; = 1.29E-05*scaling_factor; lognormal variance with pedigree 0.098125, pedigree (1,2,5,2,3)
  Scaled to South African diesel consumption.
- Benzo(a)pyrene [air, non-urban air or from high stacks]: 4.80909e-8 kg; = 5.29E-08*scaling_factor; lognormal variance with pedigree 0.698125, pedigree (1,2,5,2,3)
  Scaled to South African diesel consumption.
- Cadmium II [air, non-urban air or from high stacks]: 1.6e-8 kg; = 1.76E-08*scaling_factor; lognormal variance with pedigree 0.698125, pedigree (1,2,5,2,3)
  Scaled to South African diesel consumption.
- Carbon dioxide, fossil [air, non-urban air or from high stacks]: 4.99091 kg; = 5.49*scaling_factor; lognormal variance with pedigree 0.058125, pedigree (1,2,5,2,3)
  Scaled to South African diesel consumption.
- Carbon monoxide, fossil [air, non-urban air or from high stacks]: 0.00890909 kg; = 0.0098*scaling_factor; lognormal variance with pedigree 0.692025, pedigree (1,4,5,2,1)
  Scaled to South African diesel consumption.
- Chromium III [air, non-urban air or from high stacks]: 8.01818e-8 kg; = 8.82E-08*scaling_factor; lognormal variance with pedigree 0.698125, pedigree (1,2,5,2,3)
  Scaled to South African diesel consumption.
- Copper ion [air, non-urban air or from high stacks]: 2.72727e-6 kg; = 3E-06*scaling_factor; lognormal variance with pedigree 0.698125, pedigree (1,2,5,2,3)
  Scaled to South African diesel consumption.
- Dinitrogen monoxide [air, non-urban air or from high stacks]: 0.000192727 kg; = 0.000212*scaling_factor; lognormal variance with pedigree 0.098125, pedigree (1,2,5,2,3)
  Scaled to South African diesel consumption.
- Methane, fossil [air, non-urban air or from high stacks]: 0.000207273 kg; = 0.000228*scaling_factor; lognormal variance with pedigree 0.098125, pedigree (1,2,5,2,3)
  Scaled to South African diesel consumption.
- NMVOC, non-methane volatile organic compounds [air, non-urban air or from high stacks]: 0.00613636 kg; = 0.00675*scaling_factor; lognormal variance with pedigree 0.082025, pedigree (1,4,5,2,1)
  Scaled to South African diesel consumption.
- Nickel II [air, non-urban air or from high stacks]: 1.11818e-7 kg; = 1.23E-07*scaling_factor; lognormal variance with pedigree 0.698125, pedigree (1,2,5,2,3)
  Scaled to South African diesel consumption.
- Nitrogen oxides [air, non-urban air or from high stacks]: 0.0719091 kg; = 0.0791*scaling_factor; lognormal variance with pedigree 0.082025, pedigree (1,4,5,2,1)
  Scaled to South African diesel consumption.
- PAH, polycyclic aromatic hydrocarbons [air, non-urban air or from high stacks]: 5.27273e-6 kg; = 5.8E-06*scaling_factor; lognormal variance with pedigree 0.358125, pedigree (1,2,5,2,3)
  Scaled to South African diesel consumption.
- Particulate Matter, < 2.5 um [air, non-urban air or from high stacks]: 0.00420909 kg; = 0.00463*scaling_factor; lognormal variance with pedigree 0.358125, pedigree (1,2,5,2,3)
  Scaled to South African diesel consumption.
- Selenium IV [air, non-urban air or from high stacks]: 1.6e-8 kg; = 1.76E-08*scaling_factor; lognormal variance with pedigree 0.098125, pedigree (1,2,5,2,3)
  Scaled to South African diesel consumption.
- Sulfur dioxide [air, non-urban air or from high stacks]: 0.0016 kg; = diesel_consumption*(500/1000000)*(64/32); lognormal variance with pedigree 0.058125, pedigree (1,2,5,2,3)
  Scaled to South African diesel consumption and sulphur content of 500ppm. Original value: 0.00178.
- Zinc II [air, non-urban air or from high stacks]: 1.6e-6 kg; = 1.76E-06*scaling_factor; lognormal variance with pedigree 0.698125, pedigree (1,2,5,2,3)
  Scaled to South African diesel consumption.
- Cadmium II [soil, agricultural]: 1.75e-7 kg; lognormal variance with pedigree 0.084, pedigree (1,4,5,5,1)
  Estimate is not geography specific. Same value as "application f plant protection product, by field sprayer, GLO"
- Lead II [soil, agricultural]: 7.8e-7 kg; lognormal variance with pedigree 0.084, pedigree (1,4,5,5,1)
  (same comment as for Cadmium II)
- Zinc II [soil, agricultural]: 0.000418182 kg; = 0.00046*scaling_factor; lognormal variance with pedigree 0.082025, pedigree (1,4,5,2,1)
  (same comment as for Cadmium II)

## Sampling procedure
The inventoried HC, NOx, CO and fuel consumption values are measurements made following two test cycles (ISO 8178 C1 test and a specific 6-level-test created by the FAT) and on measurements made during the field work. The other emissions were calculated basing on literature data and the measured fuel consumption.

## Extrapolations
Values given in the reference are representative for the chosen work processes. Processes are typical procedures for Switzerland around the year 2000, they are not statistical average processes. This dataset has been copied from an original dataset covering the geography CH. The uncertainty has been adjusted accordingly.

## Review by Assumpció ANTON 2017-11-21
Please,be aware to consider further flow updates as far as better information or emission models are available.

It could be advisable to have a specific report, similar to Ecoinvent report n.º 15 or WFLDB guidelines but specific for South African crops, where specific parameters, scaling factors used to build and calculate emissions are explained. That would help further parctitioners to validate datasets or change what they may consider.
