# treatment of sewage sludge, 70% water, WWT, WW from potato starch production, municipal incineration

Dataset: EcoSpold 2, unit process
Geography: GLO
Time period: 2006-01-01 to 2022-12-31
Technology level: current
Classification: ISIC rev.4 ecoinvent: 3821:Treatment and disposal of non-hazardous waste
Scenario: Business-as-Usual
System model: Allocation at the point of substitution
Generated by: Nikolia Stoikou
Database: ecoinvent
isCopyrightProtected: true

## General comment
The process represents the treatment of a waste (sewage sludge) that is exclusively produced from another waste treatment. Municipal incineration is the controlled combustion of a waste. Sewage sludge is generated in the wastewater treatment of 'wastewater from potato starch production'. Recommended use of this dataset: to be used within the specific chain of treatments for 'wastewater from potato starch production'. Share of biogenic carbon in the sludge: 98.947%.

## Included activities start
The activity starts with the waste being available at the gate of the treatment facility. Collection and transportation of the waste to the treatment plant is not included.

## Included activities end
The activity ends with the waste being treated and waste-specific emissions from the incineration process are released to the environment (air and water).

## Geography
Modelling parameters affecting the treatment technology are not specific to this geography.

## Technology
The waste is treated in the incineration plant with flue gas cleaning. Incineration is the controlled combustion of a waste. Auxiliary material consumption for this step of air pollution control (APC) are included in the process. Infrastructure is also included in the process. Air polution control includes, electrostatic precipitator for fly ash (ESP), wet flue gas scrubber and 25% SNCR , 42.77% SCR-high dust , 32.68% SCR-low dust -DeNOx facilities and 0% without DeNOx (weighted according to mass of burnt waste). Efficiency of iron scrap separation from slag : 58%. Efficiency of aluminium scrap separation from slag : 31%. Efficiency of copper scrap separation from slag : 31%. Gross electric efficiency technology mix 15.84% and Gross thermal efficiency technology mix 28.51%

## Reference product
- heat, for reuse in municipal waste incineration only: 1 MJ; By-product classification allocatable product; CPC 17300: Steam and hot water; lognormal variance with pedigree 0.13225, pedigree (1,1,1,1,1)
  net useful heat generated from this waste and used in internal MSWI plant energy redistribution.
  Uncertainty: uncertainty is calculated from uncertainties in waste composition and uncertainties in energy efficiency and the uncertainty in internal energy demand
  production volume 6.85282e7 MJ
    Calculated from the production volume of the reference product in proportion to the respective output amounts.
  property price 0.0106 EUR2005
    Average European district heat price from Ecoheatcool and Euroheat 2005-2006, Ecoheat Work package 1: The European heat market. Final report. 10.6 EUR/GJ i s the price of district heat. http://www.solarthermalworld.org/files/Ecoheatcool%20WP1%20Web.pdf?download
  properties: carbon allocation 0 kg, carbon content 0

## Inputs from technosphere
- EDTA, ethylenediaminetetraacetic acid: 8.30304e-7 kg
- ammonia, anhydrous, liquid: 4.20643e-11, 4.40879e-12, 9.30934e-11, 3.56739e-12, 1.62031e-10, 2.16692e-11, 1.97089e-11, 4.66256e-10, 1.39285e-11 kg (9 suppliers, which the file names only by identifier); sum of these 8.26728e-10 kg
- biowaste: -3.65148e-6, -3.21597e-8 kg (2 suppliers, which the file names only by identifier); sum of these -3.68364e-6 kg
- chemical factory, organics: 1.45379e-12 unit
- chemical, inorganic: 8.64756e-5 kg
- chemical, organic: 0.000117274 kg
- cow milk: 2.20937e-5, 0.0121931 kg (2 suppliers, which the file names only by identifier); sum of these 0.0122152 kg
- cream, from cow milk: 0.000680322 kg
- dairy: 1.11997e-7 m3
- electricity, medium voltage: 0.000627932, 6.96922e-5, 0.000197617, 5.08489e-6, 0.000154995, 2.07543e-6, 1.05897e-5, 1.65387e-5, 0.000639432, 4.74e-5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 kWh (11 suppliers, which the file names only by identifier); sum of these 0.00180633 kWh
- evaporation of milk: 2.10571e-6, 0.000485884 kg (2 suppliers, which the file names only by identifier); sum of these 0.00048799 kg
- heat, district or industrial, natural gas: 0.00116354, 0.00328723, 0.00314799, 1.86852e-5 MJ (4 suppliers, which the file names only by identifier); sum of these 0.00761745 MJ
- heat, district or industrial, other than natural gas: 3.57884e-5 MJ
- hydrogen peroxide, without water, in 50% solution state: 6.15986e-7, 1.29082e-7 kg (2 suppliers, which the file names only by identifier); sum of these 7.45068e-7 kg
- maize starch: 0.000109853 kg
- municipal solid waste: -7.10649e-8, -1.25666e-6, -7.70243e-9, -1.51282e-5, -5.38986e-9 kg (5 suppliers, which the file names only by identifier); sum of these -1.6469e-5 kg
- nitric acid, without water, in 50% solution state: 3.71165e-7, 4.82858e-6, 5.51493e-7, 1.37146e-6, 1.78354e-6, 6.57132e-7, 2.26011e-6, 5.95839e-7, 5.49452e-7, 3.89144e-6 kg (10 suppliers, which the file names only by identifier); sum of these 1.68602e-5 kg
- potassium hydroxide: 7.24373e-7 kg
- propylene glycol, liquid: 1.94769e-8, 9.55694e-9 kg (2 suppliers, which the file names only by identifier); sum of these 2.90338e-8 kg
- refrigerant R134a: 3.24731e-11 kg
- skimmed milk, from cow milk: 0.000102198 kg
- soda ash, light: 1.40609e-8 kg
- sodium hydroxide, without water, in 50% solution state: 2.08368e-5 kg
- sodium hypochlorite, without water, in 15% solution state: 3.72997e-10, 1.77995e-9 kg (2 suppliers, which the file names only by identifier); sum of these 2.15295e-9 kg
- spray-drying of milk: 1.4676e-7, 3.38641e-5 kg (2 suppliers, which the file names only by identifier); sum of these 3.40109e-5 kg
- strawberry: 0.000216547 kg
- sugar, from sugar beet: 0.000233951 kg
- sugar, from sugarcane: 0.000131549 kg
- tap water: 3.61369e-7, 0.00925522, 3.90968e-6, 1.55047e-7, 3.34088e-5, 2.8931e-7, 4.47404e-5, 1.01709e-7, 7.79381e-7 kg (9 suppliers, which the file names only by identifier); sum of these 0.00933896 kg
- transport, freight, lorry, unspecified: 2.20937e-6 metric ton*km
- wastewater from potato starch production: -1.64499e-7, -3.41206e-5 m3 (2 suppliers, which the file names only by identifier); sum of these -3.42851e-5 m3
- water, deionised: 4.46942e-9, 1.24159e-6, 4.05346e-6 kg (3 suppliers, which the file names only by identifier); sum of these 5.29952e-6 kg
- wheat grain: 1.01388e-5, 5.37175e-8 kg (2 suppliers, which the file names only by identifier); sum of these 1.01925e-5 kg
- whey: 4.39054e-5 kg

## Inputs from nature
- Water, unspecified natural origin [natural resource, in water]: 2.41581e-5 m3
- Water, well, in ground [natural resource, in water]: 1.9822e-6 m3

## Emissions to nature
- Ammonia [air, unspecified]: 8.26728e-10 kg
- Methane, chlorodifluoro-, HCFC-22 [air, unspecified]: 3.24731e-11 kg
- Water [air, unspecified]: 1.68561e-6 m3

## Extrapolations
Modelling parameters are based on an average municipal solid waste incineration plant in Switzerland for the year of 2010 (grate incinerators).
