# electricity, high voltage, import from CA-NS

Dataset: EcoSpold 2, unit process
Geography: CA-NB
Time period: 2013-01-01 to 2022-12-31
Technology level: current
Classification: ISIC rev.4 ecoinvent: 3510:Electric power generation, transmission and distribution
Tags: Canada
Scenario: Business-as-Usual
System model: Allocation at the point of substitution
Generated by: Karin Treyer
Database: ecoinvent
isCopyrightProtected: true

## General comment
This dataset represents the amount of imported electricity from Nova Scotia (Canada) to New Brunswick (Canada). The import value is valid for 2013 and includes all electricity imports, independently whether used within the importing country, or re-exported. For a discussion of different ways of modeling electricity trade in LCI, please refer to (Itten & Frischknecht 2014).

## Included activities start
This activity represents the point of 'handing over' the electricity from one country to the other at the border.

## Included activities end
This dataset doesn't include any electricity losses or transmission infrastructure as these are accounted for in the market datasets.

## Time period
Annual production volume valid for 2013.

## Reference product
- electricity, high voltage: 1 kWh; By-product classification allocatable product; CPC 17100: Electrical energy
  production volume 6.0995e7 kWh
    Literature value.
    StatCan, 2014
    http://www5.statcan.gc.ca/cansim/a34?lang=eng&id=1270007&searchTypeByValue=1&mode=tableSummary&p2=35
    http://www5.statcan.gc.ca/cansim/a34?lang=eng&id=1270006&searchTypeByValue=1&mode=tableSummary&p2=35
    http://www5.statcan.gc.ca/cansim/a34?lang=eng&id=1270004&searchTypeByValue=1&mode=tableSummary&p2=35
  property price 0.0977 EUR2005
    Temporary price data. Calculated as 90% of purchasers price based on: 94% of the average price (to account for a 6% loss in transformation and transmission) for electricity for industrial consumersin 2005 (excluded taxes). From IEA.
  properties: carbon allocation 0 kg, carbon content 0

## Inputs from technosphere
- electricity, high voltage: 1 kWh
  activityLink added to better reflect the reality of the supply chain

## Sampling procedure
Literature

## Review by Carl Vadenbo 2015-08-04
The update of the whole electricity sector for the ecoinvent v3.2 database consist of hundreds of datasets. All these datasets have passed through a streamlined review processes where the underlying modelling of production volumes, technology shares and efficiencies was reviewed in detail prior to the datasets being submitted to the database.
