# treatment of road wear emissions, passenger car

Dataset: EcoSpold 2, unit process
Geography: RoW
Time period: 2012-01-01 to 2022-12-31
Technology level: current
Classification: ISIC rev.4 ecoinvent: 3821:Treatment and disposal of non-hazardous waste
Scenario: Business-as-Usual
System model: Allocation at the point of substitution
Generated by: Andrew Simons
Published in: Ntziachristos L., Paul P. 2009
Database: ecoinvent
isCopyrightProtected: true

## General comment
This dataset represents the treatment of non-exhaust emissions produced by road abrasion from an average passenger car. The datasets are treatments because they represent a removal of substances from the technosphere (removal of road material).

This dataset represents the operation of an average passenger car.

Calculation of non-exhaust emissions (tyre, brake and road wear emissions as well as petrol evaporation emissions) are based on: Ntziachristos, L., Boulter, P. (2009). EMEP/EEA air pollutant emissions inventory guidebook 2009: Road vehicle tyre and brake wear; Road surface wear. Copenhagen, European Environment Agency.

The emission factors relate to 1kg road wear. The quantity of road wear emissions per kg vehicle and km is then defined in the transport datasets.

The road wear emissions are to air, water and soil. All particulates are accounted for as emissions to air and have particle sizes below 100um. Anything above this does not remain airborne over longer periods. Total particulates equals total of all air emission substances. The fractions to water and soil are calculated by deducting the airborne emissions from the total tyre wear. This remaining amount is then simply split 50/50 between water and soil.

## Included activities start
The activity starts with the road abrasion induced by passenger car

## Included activities end
The activity ends with emissions of road abrasion induced by passenger car

## Reference product
- road wear emissions, passenger car: -1 kg; source Ntziachristos L., Paul P. 2009; By-product classification Waste; CPC 53211: Highways (except elevated highways), streets and roads
  production volume 2.67263e9 kg
    Estimation. Value represents 2008 because regional annual production volume was only available for this year. Calculated from production volume of reference product using the relative outputs. Extrapolation from vkm data for Europe in 1990 and 2008, and for GLO in 1990.
    a) Road wear emissions RER 1990 = 7.777e+7kg
    b) Road wear emissions RER 2008 = 9.837e+7kg
    c) Road wear emissions GLO 1990 = 2.9e+8kg
    Road wear emissions GLO 2008 = (b/a)*c
    Extrapolation from vkm data for Europe and GLO using:
    Shafer A., The global demand for motorized mobility, 1998, Elsevier
    <http://www.sciencedirect.com/science/article/pii/S0965856498000044>
  property price 0 EUR2005
    Waste products are assigned a price of zero as they are assumed to require further treatment.
  properties: carbon allocation 0 kg, carbon content 0

## Emissions to nature
- Particulate Matter, < 2.5 um [air, urban air close to ground]: 0.27 kg; = LiveLink('\\FS01\Gabe\_LCA\Ecoinvent\v3\v3 data\Livelink data for ecoeditor\All_non_exhaust_emissions.xls','Road','D7','', 'Automatic'); source Ntziachristos L., Paul P. 2009; lognormal variance with pedigree 0.0419, pedigree (2,2,5,4,1)
  Literature value. The three classes of particulates are included in the total emissions together with other air emissions. This implies a (minor) double-counting of mass as by Ecoinvent quality guidelines in “Overview and methodology, final draft revision 2, Weidema et al., 2012
- Particulate Matter, > 10 um [air, urban air close to ground]: 0.5 kg; = LiveLink('\\FS01\Gabe\_LCA\Ecoinvent\v3\v3 data\Livelink data for ecoeditor\All_non_exhaust_emissions.xls','Road','D5','', 'Automatic'); source Ntziachristos L., Paul P. 2009; lognormal variance with pedigree 0.0419, pedigree (2,2,5,4,1)
  (same comment as for Particulate Matter, < 2.5 um)
- Particulate Matter, > 2.5 um and < 10um [air, urban air close to ground]: 0.23 kg; = LiveLink('\\FS01\Gabe\_LCA\Ecoinvent\v3\v3 data\Livelink data for ecoeditor\All_non_exhaust_emissions.xls','Road','D6','', 'Automatic'); source Ntziachristos L., Paul P. 2009; lognormal variance with pedigree 0.0419, pedigree (2,2,5,4,1)
  (same comment as for Particulate Matter, < 2.5 um)

## Sampling procedure
Literature

## Extrapolations
Extrapolation from dataset for Europe using GDP per capita and p/v values.Source:
Shafer A., The global demand for motorized mobility, 1998, Elsevier
<http://www.sciencedirect.com/science/article/pii/S0965856498000044>
World Bank.org
<http://data.worldbank.org/indicator/NY.GDP.PCAP.CD/countries?display=default>

## Review by Dominik Saner 2012-06-11
The dataset was found to meet the quality guidelines for the ecoinvent database on 2012-06-18.
