# photovoltaic module production, building-integrated, for facade installation

Dataset: EcoSpold 2, unit process
Geography: RER
Time period: 1992-01-01 to 2022-12-31
Technology level: current
Classification: EcoSpold01Categories: photovoltaic/production of components
Classification: ISIC rev.4 ecoinvent: 4390:Other specialized construction activities
Tags: ConvertedDataset
Scenario: Business-as-Usual
System model: Allocation at the point of substitution
Share of production covered: 10 %
Generated by: Niels Jungbluth
Published in: Jungbluth, N. 2008
Database: ecoinvent
isCopyrightProtected: true

## General comment
Production of the additional components necessary for the mounting of 1 m2 PV panel or laminate.
[This dataset was already contained in the ecoinvent database version 2. It was not individually updated during the transfer to ecoinvent version 3. Life Cycle Impact Assessment results may still have changed, as they are affected by changes in the supply chain, i.e. in other datasets. This dataset was generated following the ecoinvent quality guidelines for version 2. It may have been subject to central changes described in the ecoinvent version 3 change report (http://www.ecoinvent.org/database/ecoinvent-version-3/reports-of-changes/), and the results of the central updates were reviewed extensively. The changes added e.g. consistent water flows and other information throughout the database. The documentation of this dataset can be found in the ecoinvent reports of version 2, which are still available via the ecoinvent website. The change report linked above covers all central changes that were made during the conversion process.]

## Included activities end
Materials and packaging for the production and estimation for metal processing. Disposal of the product after use. Energy use for the construction process must be included in data for the PV-plant.

## Geography
Production in CH.

## Technology
Construction parts for a photovoltaic system.

## Time period
Date of data investigation. Actual weight of materials updated in 2008.

## Reference product
- photovoltaic module, building-integrated, for facade installation: 1 m2; By-product classification allocatable product; CPC 87360: Installation services of electrical machinery and apparatus n.e.c.
  EcoSpold01Location=RER
  production volume 607.905 m2
    Not known.
    Estimated from total installed capacity of 3kWp PV plant in 2000: GLO installed PV-power 711MWp (Tab 11.3, ecoinvent v2 report 6_XII). It was assumed that Europe produces 36% of PV capacities (info obtained from Fig 8.1, ecoinvent v2 report 6_XII). An average surface of 28.5 m2 was estimated using information in Tab 11.2 from the same report. And the share between the different types of installation was obtained from Tab 12.7 of the same report. RER shares were used for GLO.
  property price 5.06459 EUR2005
    Calculated based on inputs: The price of the product has been calculated as a sum of the values of the material and energy inputs for this product. This value is therefore a rough estimation. It may underestimate the real price since there are additional expenses when producing any product. These expences can include for example labour costs, treatment of waste materials and profit for the producer. Please consider carefully whether this level of data quality is acceptable for your application.
  properties: carbon allocation 0 kg, carbon content 0

## Inputs from technosphere
- aluminium, wrought alloy: 3.2717 kg; lognormal variance with pedigree 0.1701, pedigree (1,2,5,1,1)
  Literature and own estimations
  EcoSpold01Location=RER
  Uncertainty: Literature and own estimations
  properties: dry mass 1 kg, wet mass 1 kg
- section bar extrusion, aluminium: 3.2717 kg; lognormal variance with pedigree 0.202, pedigree (3,4,5,1,3)
  Estimation
  EcoSpold01Location=RER
  Uncertainty: Estimation

## Sampling procedure
Detailed analysis of materials for one product in a diploma thesis.

## Extrapolations
From one product to the whole market. Correction factor applied to correct for today average weight per m2.

## Review by Christian Bauer 2009-02-15
Passed.
none
