# treatment of biowaste, municipal incineration

Dataset: EcoSpold 2, unit process
Geography: GLO
Time period: 2006-01-01 to 2022-12-31
Technology level: current
Classification: ISIC rev.4 ecoinvent: 3821:Treatment and disposal of non-hazardous waste
Synonyms: Kehrichtverbrennung; Siedlungsabfallverbrennung; municipal waste incineration
Scenario: Business-as-Usual
System model: Allocation at the point of substitution
Share of production covered: 1.8 %
Generated by: Gabor Doka
Published in: Doka G. 2013
Database: ecoinvent
isCopyrightProtected: true

## General comment
This dataset represents the activity of waste disposal of biowaste in a municipal solid waste incinerator (MSWI) // Recommended use of this dataset: For average biowaste (mixture of garden, yard, food/kitchen waste) which goes to disposal as part of communal waste mixture. // // Waste composition (wet, in ppm): upper heating value 6.087 MJ/kg; lower heating value 4.289 MJ/kg; H2O 650000; O 110270; H 18556; C 141650; S 1307.7; N 3488.9; P 985.61; B 8.9315; Cl 3488.9; Br 5.2333; F 174.44; I 0.047972; Ag n.a.; As 1.7444; Ba n.a.; Cd 0.12037; Co 4.3611; Cr 6.9778; Cu 15.7; Hg 0.061055; Mn 3.7505; Mo 0.34889; Ni 4.7274; Pb 16.188; Sb n.a.; Se 0.4359; Sn 6.9744; V 2.6154; Zn 50.798; Be n.a.; Sc n.a.; Sr n.a.; Ti n.a.; Tl n.a.; W n.a.; Si 34872; Fe 523.33; Ca 19014; Al 8717.9; K 3052.8; Mg 2459.7; Na 1308.3; // Share of carbon in waste that is biogenic 100%. // Share of metals in waste not oxidised and bulk-recyclable (exclude very small or thin parts) Iron: 0%; Alu: 0%; Copper: 0%. // One kg of this waste produces 0.1357 kg of slag and 0.02455 kg of residues, which are landfilled. Additional solidification with 0.00982 kg of cement. // Net energy production: 0.41MJ/kg electric energy and 1MJ/kg thermal energy. // Recovery of metal scrap to recycling: 0g iron scrap, 0g aluminium scrap, 0g copper scrap.

## Included activities start
waste incineration from waste reception gate and delivery into waste bunker at incinerator plant site (without transports to the incinerator)

## Included activities end
Waste-specific short-term emissions to water from leachate. Long-term emissions from landfill to ground water.

## Geography
Specific to the technology mix encountered in Switzerland in 2010. Well applicable to modern incineration practices in Europe, North America or Japan.

## Technology
average Swiss MSWI plants in 2010 (grate incinerators) with electrostatic precipitator for fly ash (ESP), wet flue gas scrubber and 25% SNCR , 42.77% SCR-high dust , 32.68% SCR-low dust -DeNOx facilities and 0% without Denox (weighted according to mass of burnt waste, representing Swiss average). Efficiency of iron scrap separation from slag : 58%. Efficiency of non-ferrous scrap separation from slag : 31%. Gross electric efficiency technology mix 15.84% and Gross thermal efficiency technology mix 28.51%

## Time period
Waste composition as given in literature reference, theoretical data or other source. Transfer coefficients for modern MSWI.

## Reference product
- heat, for reuse in municipal waste incineration only: 1 MJ; name E_th_prod_MSWI; By-product classification allocatable product; CPC 17300: Steam and hot water; lognormal variance with pedigree 0.00014622, pedigree (1,1,1,1,1)
  Net electricity generated from this waste and used in internal MSWI plant energy redistribution.
  Uncertainty: uncertainty is calculated from uncertainties in waste composition and uncertainties in energy efficiency and the uncertainty in internal energy demand
  production volume 6.828e10 MJ
    calculated in proportion to reference product waste input to incinerator
  property exergy 0.1842 MJ; name E_th_prod_MSWI_exergy
    This exergy property is based on the exergy content of the product.
  property price 0.0106 EUR2005
    Average European district heat price from Ecoheatcool and Euroheat 2005-2006, Ecoheat Work package 1: The European heat market. Final report. 10.6 EUR/GJ i s the price of district heat. http://www.solarthermalworld.org/files/Ecoheatcool%20WP1%20Web.pdf?download
  property true value relation 0.1842; name E_th_prod_MSWI_true_value_relation
    property to calculate "true value" from
  properties: carbon allocation 0 kg, carbon content 0

## Inputs from technosphere
- EUR-flat pallet: 6.05229e-6, 2.75104e-6 unit (2 suppliers, which the file names only by identifier); sum of these 8.80334e-6 unit
- [thio]carbamate-compound: 1.13342e-7 kg
- acrylic dispersion, with water, in 58% solution state: 2.75013e-9 kg
- acrylic varnish, with water, in 53% solution state: 7.32577e-8 kg
- activated bentonite: 7.96412e-7 kg
- alkylbenzene sulfonate, linear, petrochemical: 6.47826e-10 kg
- aluminium scrap, post-consumer: -5.75448e-8 kg
- aluminium scrap, post-consumer, prepared for melting: -8.8366e-9 kg
- aluminium sulfate, powder: 2.49651e-7 kg
- aluminium, primary, ingot: 8.8366e-9 kg
- aluminium, wrought alloy: 5.75448e-8 kg
- ammonium nitrate: 6.46487e-6, 9.3216e-6, 5.43384e-6, 6.54852e-5 kg (4 suppliers, which the file names only by identifier); sum of these 8.67055e-5 kg
- ammonium sulfate: 1.69988e-7, 1.50807e-6 kg (2 suppliers, which the file names only by identifier); sum of these 1.67806e-6 kg
- application of plant protection product, by field sprayer: 2.15162e-7, 6.18021e-8 ha (2 suppliers, which the file names only by identifier); sum of these 2.76964e-7 ha
- ash from paper production sludge: -6.00113e-9 kg
- bark chips, wet, measured as dry mass: 1.4516e-6 kg
- benzimidazole-compound: 4.51732e-9 kg
- biowaste: -0.00572717, -3.39306e-5, -1.7328e-8 kg (3 suppliers, which the file names only by identifier); sum of these -0.00576112 kg
- bipyridylium-compound: 2.36442e-7 kg
- boric acid, anhydrous, powder: 1.1765e-6 kg
- building, hall: 4.17373e-7 m2
- calcium carbonate, precipitated: 4.26829e-7 kg
- calcium chloride: 1.8065e-10, 6.3947e-10 kg (2 suppliers, which the file names only by identifier); sum of these 8.2012e-10 kg
- chemical, inorganic: 6.31109e-7 kg
- chemical, organic: 3.15348e-7 kg
- chimney: 1.11013e-13 m
- chlorine dioxide: 4.39886e-7, 9.07802e-8 kg (2 suppliers, which the file names only by identifier); sum of these 5.30666e-7 kg
- clay: 1.10161e-7 kg
- cocoons: 7.5463e-7, 6.67298e-6 kg (2 suppliers, which the file names only by identifier); sum of these 7.42761e-6 kg
- compost: 0.00068884 kg
- conveyor belt: 2.10029e-9 m
- copper oxide: 7.31725e-7 kg
- corrugated board box: 6.06944e-8, 1.40878e-7, 2.26087e-9 kg (3 suppliers, which the file names only by identifier); sum of these 2.03833e-7 kg
- cottonseed: 0.000693447, 0.00313142, 4.85996e-6 kg (3 suppliers, which the file names only by identifier); sum of these 0.00382973 kg
- cyclic N-compound: 4.76209e-7 kg
- diesel, burned in agricultural machinery: 0.000922872 MJ
- diesel, burned in building machine: 8.47908e-6 MJ
- diesel, low-sulfur: 9.33123e-11, 2.24887e-9, 4.22604e-11, 6.24767e-12, 1.88339e-10, 9.42007e-11 kg (6 suppliers, which the file names only by identifier); sum of these 2.67323e-9 kg
- dust collector, electrostatic precipitator, for industrial use: 2.69759e-13 unit
- electricity, low voltage: 8.46008e-8, 7.31139e-7, 2.29691e-8, 8.20106e-8, 7.6428e-8, 3.37948e-9, 2.35902e-8, 6.54374e-7, 1.0291e-7, 3.46808e-7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 kWh (104 suppliers, which the file names only by identifier); sum of these 0.00126474 kWh
- electricity, medium voltage: 1.50097e-7, 2.02669e-7, 2.91477e-7, 6.08437e-8, 3.56381e-6, 3.8984e-5, 1.92475e-7, 3.24073e-10, 7.20755e-8, 9.09532e-7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 kWh (74 suppliers, which the file names only by identifier); sum of these 0.000216106 kWh
- enzymes: 2.67056e-8 kg
- establishing orchard: 0.000114966 unit
- ethanol, without water, in 99.7% solution state, from ethylene: 4.09476e-11, 9.34419e-11 kg (2 suppliers, which the file names only by identifier); sum of these 1.34389e-10 kg
- ethylene glycol monoethyl ether: 1.21098e-9 kg
- ethylene vinyl acetate copolymer: 8.98725e-9 kg
- fertilising, by broadcaster: 4.12014e-8, 1.51472e-7 ha (2 suppliers, which the file names only by identifier); sum of these 1.92674e-7 ha
- fodder loading, by self-loading trailer: 1.5276e-8 m3
- fruit tree seedling, for planting: 0.000114966 unit
- furnace, wood chips, softwood storage area, 1000kW: 1.34802e-12 unit
- furnace, wood chips, with silo, 1000kW: 3.4152e-12 unit
- furnace, wood chips, with silo, 5000kW: 5.6972e-12 unit
- glyphosate: 1.62079e-7 kg
- green manure, organic, until February: 7.52888e-9 ha
- gypsum, mineral: 2.78752e-5, 1.3071e-7, 5.86669e-8 kg (3 suppliers, which the file names only by identifier); sum of these 2.80646e-5 kg
- harvesting, by complete harvester, beets: 7.52888e-9 ha
- hazardous waste, for incineration: -4.24734e-8 kg
- heat, central or small-scale, other than natural gas: 0.000512539, 0.00156903, 0.00029042 MJ (3 suppliers, which the file names only by identifier); sum of these 0.00237199 MJ
- heat, district or industrial, natural gas: 0.000197009, 9.73121e-7, 4.61947e-5, 3.33498e-5, 4.33e-8 MJ (5 suppliers, which the file names only by identifier); sum of these 0.00027757 MJ
- heat, district or industrial, other than natural gas: 2.2958e-5, 2.51871e-6, 2.46198e-6, 2.10119e-6, 0.000455257, 7.02811e-5 MJ (6 suppliers, which the file names only by identifier); sum of these 0.000555578 MJ
- heavy fuel oil: 2.52414e-8, 2.12395e-10, 1.07978e-9, 1.40009e-9, 2.72471e-10, 3.64743e-10 kg (6 suppliers, which the file names only by identifier); sum of these 2.85708e-8 kg
- hexane: 3.73068e-7 kg
- hoeing: 1.50577e-8 ha
- hydrogen peroxide, without water, in 50% solution state: 2.22306e-8 kg
- industrial machine, heavy, unspecified: 6.54989e-10, 7.27993e-11 kg (2 suppliers, which the file names only by identifier); sum of these 7.27788e-10 kg
- inorganic nitrogen fertiliser, as N: 1.96035e-5, 1.7007e-11, 7.47965e-6, 4.72148e-12, 3.33301e-6, 2.9927e-8, 1.46607e-10, 7.82898e-11, 1.03391e-11, 3.29877e-10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 kg (62 suppliers, which the file names only by identifier); sum of these 6.27451e-5 kg
- inorganic phosphorus fertiliser, as P2O5: 2.34349e-5, 1.09632e-10, 4.59654e-11, 3.91385e-9, 1.32999e-7, 4.99624e-11, 4.39669e-12, 5.13898e-12, 1.18197e-11, 4.05696e-7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 kg (62 suppliers, which the file names only by identifier); sum of these 8.50494e-5 kg
- inorganic potassium fertiliser, as K2O: 1.78834e-7, 1.66692e-9, 4.77269e-6, 4.27874e-8, 8.88144e-7, 2.11446e-8, 4.81052e-9, 3.26137e-9, 1.23207e-8, 4.26696e-9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 kg (29 suppliers, which the file names only by identifier); sum of these 1.2906e-5 kg
- irrigation: 9.71542e-6, 6.54787e-7, 3.92797e-7, 9.85077e-9, 1.75561e-6, 2.41323e-6, 5.18643e-5, 9.86986e-6, 3.83021e-7, 2.30179e-5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 m3 (16 suppliers, which the file names only by identifier); sum of these 0.000350753 m3
- isopropanol: 5.03806e-9 kg
- land use change, perennial crop: 1.2292e-8, 3.9334e-8, 5.48498e-8, 1.16047e-8 ha (4 suppliers, which the file names only by identifier); sum of these 1.18081e-7 ha
- latex: 8.98088e-8 kg
- light fuel oil: 3.95483e-8, 3.92548e-9, 3.7744e-10, 2.80501e-10, 2.6049e-10, 1.945e-9 kg (6 suppliers, which the file names only by identifier); sum of these 4.63372e-8 kg
- lime: 1.60119e-5, 0.000354924 kg (2 suppliers, which the file names only by identifier); sum of these 0.000370936 kg
- liquefied petroleum gas: 1.39636e-7, 1.11966e-9, 7.1016e-10, 5.6916e-8, 1.6686e-9, 5.03045e-9, 2.38199e-7 kg (7 suppliers, which the file names only by identifier); sum of these 4.4328e-7 kg
- liquid manure spreading, by vacuum tanker: 9.8899e-8 m3
- lubricating oil: 6.32869e-8 kg
- maize starch: 4.23184e-8 kg
- mandarin: 0.0172024 kg
- manganese(III) oxide: 5.06008e-7 kg
- mango: 0.000177861, 3.04801e-6 kg (2 suppliers, which the file names only by identifier); sum of these 0.000180909 kg
- manure, solid, cattle: 0.00014389 kg
- melamine formaldehyde resin: 1.477e-6 kg
- methylene diphenyl diisocyanate: 2.66188e-7 kg
- mulberry leaves: 0.00219932 kg
- natural gas, high pressure: 9.29992e-10, 3.92552e-10, 2.24825e-9, 6.67197e-10, 3.77438e-8, 3.85772e-9, 4.21101e-10, 1.24261e-11, 1.49527e-9, 1.57021e-9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 m3 (23 suppliers, which the file names only by identifier); sum of these 1.08572e-7 m3
- nickel, class 1: 9.34235e-9 kg
- nitrile-compound: 1.38383e-7 kg
- oil mill: 7.73682e-13 unit
- organophosphorus-compound, unspecified: 3.24444e-7 kg
- oxygen, liquid: 3.74827e-8 kg
- packaging film, low density polyethylene: 7.06829e-9 kg
- packaging, for fertilisers: 0.00167377 kg
- packaging, for pesticides: 1.08564e-5 kg
- paper mill, integrated: 3.29066e-16 unit
- paper, newsprint: 1.3872e-6, 4.1876e-6 kg (2 suppliers, which the file names only by identifier); sum of these 5.57479e-6 kg
- paper, woodfree, coated: 3.21234e-6 kg
- paraffin: 1.55248e-6 kg
- pesticide, unspecified: 2.35432e-9 kg
- petrol, unleaded, burned in machinery: 4.47151e-5 MJ
- phenolic resin: 1.68682e-6 kg
- phosphate rock, beneficiated: 1.17238e-7, 4.42616e-5, 3.44321e-7, 3.43707e-7 kg (4 suppliers, which the file names only by identifier); sum of these 4.50669e-5 kg
- phosphoric acid, industrial grade, without water, in 85% solution state: 7.15432e-7 kg
- planting tree: 0.000114966 unit
- polyethylene terephthalate, granulate, amorphous: 1.11189e-6 kg
- portafer: 1.87326e-7 kg
- potassium chloride: 0.000106949, 3.68081e-6 kg (2 suppliers, which the file names only by identifier); sum of these 0.00011063 kg
- potassium sulfate: 9.0718e-6, 4.31471e-5 kg (2 suppliers, which the file names only by identifier); sum of these 5.22189e-5 kg
- potato starch: 1.21192e-8 kg
- poultry manure, dried: 5.78159e-5 kg
- printing ink, offset, without solvent, in 47.5% solution state: 4.71143e-8 kg
- pulpwood, hardwood, measured as solid wood under bark: 6.33392e-8 m3
- pulpwood, softwood, measured as solid wood under bark: 4.40368e-9, 2.30324e-7, 4.92389e-9 m3 (3 suppliers, which the file names only by identifier); sum of these 2.39652e-7 m3
- quicklime, milled, packed: 2.7667e-8 kg
- rape oil, crude: 7.56311e-11, 1.06266e-7 kg (2 suppliers, which the file names only by identifier); sum of these 1.06341e-7 kg
- rosin size, for paper production: 2.38035e-9 kg
- sawdust, wet, measured as dry mass: 1.01921e-7, 4.99687e-6 kg (2 suppliers, which the file names only by identifier); sum of these 5.09879e-6 kg
- sheet rolling, aluminium: 6.63814e-8 kg
- slab and siding, softwood, wet, measured as dry mass: 2.15489e-6, 8.35578e-6 kg (2 suppliers, which the file names only by identifier); sum of these 1.05107e-5 kg
- sodium chlorate, powder: 4.11713e-8 kg
- sodium chloride, powder: 1.26292e-9 kg
- sodium hydroxide, without water, in 50% solution state: 1.19313e-7 kg
- sodium metasilicate pentahydrate, 58% active substance, powder: 6.45925e-10, 1.3414e-9 kg (2 suppliers, which the file names only by identifier); sum of these 1.98732e-9 kg
- sodium percarbonate, powder: 7.50393e-10, 1.55835e-9 kg (2 suppliers, which the file names only by identifier); sum of these 2.30874e-9 kg
- solid manure loading and spreading, by hydraulic loader and spreader: 0.000269391 kg
- sowing: 7.52888e-9 ha
- soybean: 2.36727e-6, 3.27346e-6 kg (2 suppliers, which the file names only by identifier); sum of these 5.64074e-6 kg
- soybean, organic: 2.08916e-5 kg
- spent solvent mixture: -2.4926e-9, -9.73948e-10 kg (2 suppliers, which the file names only by identifier); sum of these -3.46655e-9 kg
- steam, in chemical industry: 7.50524e-6, 4.25678e-5 kg (2 suppliers, which the file names only by identifier); sum of these 5.0073e-5 kg
- sugar beet seed, for sowing: 1.58106e-8 kg
- sulfate pulp, bleached: 8.33329e-8 kg
- sulfate pulp, unbleached: 9.60642e-9 kg
- sulfite: 2.54134e-7, 5.14588e-7 kg (2 suppliers, which the file names only by identifier); sum of these 7.68722e-7 kg
- sulfuric acid: 1.20356e-7 kg
- synthetic rubber: 4.13675e-10 kg
- tap water: 5.06185e-7, 3.97239e-5, 1.23085e-6, 0.000141412, 2.2967e-6, 0.000355173, 8.07422e-7, 6.18686e-6 kg (8 suppliers, which the file names only by identifier); sum of these 0.000547337 kg
- textile, woven cotton: 6.51712e-10 kg
- thermoforming of plastic sheets: 1.11189e-6 kg
- thermoforming, with calendering: 9.19792e-10 kg
- tillage, harrowing, by spring tine harrow: 1.50577e-8 ha
- tillage, ploughing: 7.52888e-9 ha
- transport, freight train: 3.43441e-7, 8.71085e-8, 4.33763e-7, 2.20577e-8, 3.14409e-7 metric ton*km (5 suppliers, which the file names only by identifier); sum of these 1.20078e-6 metric ton*km
- transport, freight, inland waterways, barge: 1.59583e-7 metric ton*km
- transport, freight, lorry, unspecified: 3.05048e-7, 4.02355e-8, 6.29939e-9 metric ton*km (3 suppliers, which the file names only by identifier); sum of these 3.51583e-7 metric ton*km
- transport, tractor and trailer, agricultural: 1.15768e-6, 1.01365e-9 metric ton*km (2 suppliers, which the file names only by identifier); sum of these 1.15869e-6 metric ton*km
- trellis system, wooden poles, soft wood, tar impregnated: 7.21799e-7 ha
- triazine-compound, unspecified: 1.52083e-8 kg
- urea: 1.08797e-5, 0.000205306, 8.77922e-6, 5.93991e-5 kg (4 suppliers, which the file names only by identifier); sum of these 0.000284364 kg
- urea formaldehyde resin: 4.43788e-6 kg
- vegetable oil, refined: 5.61988e-7 kg
- waste emulsion paint: -5.95571e-10, -5.6141e-11 kg (2 suppliers, which the file names only by identifier); sum of these -6.51712e-10 kg
- waste mineral oil: -2.73071e-9 kg
- waste paper, unsorted: -4.50652e-7, -4.50652e-7 kg (2 suppliers, which the file names only by identifier); sum of these -9.01303e-7 kg
- waste paperboard, unsorted: -1.01917e-7, -1.01917e-7 kg (2 suppliers, which the file names only by identifier); sum of these -2.03833e-7 kg
- waste wood, untreated: -2.29227e-7, -2.10325e-6, -0.000105079, -0.000518995, -1.3304e-6, -3.98508e-5, -3.26834e-5, -2.13469e-5 kg (8 suppliers, which the file names only by identifier); sum of these -0.000721618 kg
- wastewater from hard fibreboard production: -2.94878e-7 m3
- wastewater from medium density board production: -6.41414e-9 m3
- wastewater from particle board production: -5.86936e-9 m3
- wastewater from textile production: -1.18842e-7 m3
- wastewater from vegetable oil refinery: -9.17017e-10 m3
- wastewater, average: -4.16108e-10, -6.92422e-8, -1.65572e-8 m3 (3 suppliers, which the file names only by identifier); sum of these -8.62155e-8 m3
- white spirit: 7.04866e-9 kg
- wood ash mixture, pure: -4.34516e-7 kg
- wood chips, dry, measured as dry mass: 4.96023e-5 kg
- wood chips, from post-consumer wood, measured as dry mass: 2.237e-5 kg
- wood chips, wet, measured as dry mass: 3.87038e-9, 3.80838e-6 kg (2 suppliers, which the file names only by identifier); sum of these 3.81225e-6 kg
- wooden board factory, organic bonded boards: 8.78701e-15 unit
- zinc monosulfate: 4.84054e-7, 9.16304e-8 kg (2 suppliers, which the file names only by identifier); sum of these 5.75685e-7 kg

## Inputs from nature
- Carbon dioxide, in air [natural resource, in air]: 0.00358655 kg
- Energy, gross calorific value, in biomass [natural resource, biotic]: 0.0187062 MJ
- Occupation, annual crop, non-irrigated, intensive [natural resource, land]: 4.43481e-5 m2*year
- Occupation, industrial area [natural resource, land]: 3.83729e-10 m2*year
- Occupation, permanent crop, irrigated [natural resource, land]: 0.00723748 m2*year
- Transformation, from annual crop, non-irrigated, intensive [natural resource, land]: 7.52886e-5 m2
- Transformation, from permanent crop, irrigated [natural resource, land]: 0.000360899 m2
- Transformation, to annual crop, non-irrigated, intensive [natural resource, land]: 7.52886e-5 m2
- Transformation, to permanent crop, irrigated [natural resource, land]: 0.000360899 m2
- Water, cooling, unspecified natural origin [natural resource, in water]: 3.07163e-7 m3
- Water, lake [natural resource, in water]: 3.72885e-7 m3
- Water, river [natural resource, in water]: 5.09034e-9 m3
- Water, unspecified natural origin [natural resource, in ground]: 9.34368e-6 m3
- Water, unspecified natural origin [natural resource, in water]: 2.35185e-6 m3
- Water, well, in ground [natural resource, in water]: 3.05815e-7 m3

## Emissions to nature
- 2-Propanol [air, urban air close to ground]: 5.03806e-9 kg
- Acetaldehyde [air, unspecified]: 1.13014e-10 kg
- Acetaldehyde [air, urban air close to ground]: 4.72102e-11 kg
- Acetic acid [air, urban air close to ground]: 5.05301e-12 kg
- Acetone [air, urban air close to ground]: 1.74e-13 kg
- Ammonia [air, non-urban air or from high stacks]: 4.40497e-5 kg
- Ammonia [air, unspecified]: 1.13504e-9 kg
- Ammonia [air, urban air close to ground]: 4.51493e-10 kg
- Arsenic ion [air, unspecified]: 6.56091e-13 kg
- Arsenic ion [air, urban air close to ground]: 2.75875e-13 kg
- Benzene [air, unspecified]: 5.97043e-10 kg
- Benzene [air, urban air close to ground]: 2.48973e-10 kg
- Benzene, ethyl- [air, unspecified]: 1.96827e-11 kg
- Benzene, ethyl- [air, urban air close to ground]: 2.31763e-10 kg
- Benzene, hexachloro- [air, unspecified]: 4.72386e-18 kg
- Benzene, hexachloro- [air, urban air close to ground]: 1.87773e-18 kg
- Benzo(a)pyrene [air, unspecified]: 3.28046e-13 kg
- Benzo(a)pyrene [air, urban air close to ground]: 1.30778e-13 kg
- Bromine [air, unspecified]: 3.93655e-11 kg
- Bromine [air, urban air close to ground]: 1.56477e-11 kg
- Butane [air, urban air close to ground]: 2.09744e-11 kg
- Cadmium II [air, unspecified]: 4.59264e-13 kg
- Cadmium II [air, urban air close to ground]: 1.82557e-13 kg
- Calcium [air, unspecified]: 3.83813e-9 kg
- Calcium [air, urban air close to ground]: 1.52578e-9 kg
- Carbon dioxide, fossil [air, low population density, long-term]: 1.33701e-6 kg
- Carbon dioxide, fossil [air, non-urban air or from high stacks]: 0.00037404 kg
- Carbon dioxide, fossil [air, urban air close to ground]: 4.72491e-7 kg
- Carbon dioxide, from soil or biomass stock [air, non-urban air or from high stacks]: 0.000402355 kg
- Carbon dioxide, non-fossil [air, unspecified]: 7.02017e-5 kg
- Carbon dioxide, non-fossil [air, urban air close to ground]: 0.00187776 kg
- Carbon monoxide, fossil [air, urban air close to ground]: 7.72669e-11 kg
- Carbon monoxide, non-fossil [air, unspecified]: 1.96827e-7 kg
- Carbon monoxide, non-fossil [air, urban air close to ground]: 5.41333e-8 kg
- Chlorine [air, unspecified]: 1.18096e-10 kg
- Chlorine [air, urban air close to ground]: 4.69432e-11 kg
- Chromium III [air, unspecified]: 2.59812e-12 kg
- Chromium III [air, urban air close to ground]: 1.03849e-12 kg
- Chromium VI [air, unspecified]: 2.62436e-14 kg
- Chromium VI [air, urban air close to ground]: 1.04898e-14 kg
- Cobalt II [air, urban air close to ground]: 3.82801e-14 kg
- Copper ion [air, unspecified]: 1.4434e-11 kg
- Copper ion [air, urban air close to ground]: 7.1821e-12 kg
- Dinitrogen monoxide [air, low population density, long-term]: 8.47552e-11 kg
- Dinitrogen monoxide [air, non-urban air or from high stacks]: 5.20456e-6 kg
- Dinitrogen monoxide [air, unspecified]: 1.50901e-9 kg
- Dinitrogen monoxide [air, urban air close to ground]: 6.04884e-10 kg
- Dioxins, measured as 2,3,7,8-tetrachlorodibenzo-p-dioxin [air, unspecified]: 2.03388e-17 kg
- Dioxins, measured as 2,3,7,8-tetrachlorodibenzo-p-dioxin [air, urban air close to ground]: 8.02058e-18 kg
- Ethanol [air, urban air close to ground]: 3.48e-13 kg
- Fluorine [air, unspecified]: 3.28046e-11 kg
- Fluorine [air, urban air close to ground]: 1.30398e-11 kg
- Formaldehyde [air, unspecified]: 4.17127e-9 kg
- Formaldehyde [air, urban air close to ground]: 9.81935e-9 kg
- Heptane [air, urban air close to ground]: 2.19086e-9 kg
- Hexane [air, urban air close to ground]: 3.73068e-7 kg
- Hydrocarbons, aliphatic, alkanes, unspecified [air, unspecified]: 5.97043e-10 kg
- Hydrocarbons, aliphatic, alkanes, unspecified [air, urban air close to ground]: 2.38998e-10 kg
- Hydrocarbons, aliphatic, unsaturated [air, unspecified]: 2.03388e-9 kg
- Hydrocarbons, aliphatic, unsaturated [air, urban air close to ground]: 8.08501e-10 kg
- Hydrocarbons, aromatic [air, urban air close to ground]: 2.35116e-13 kg
- Hydrochloric acid [air, urban air close to ground]: 1.8619e-12 kg
- Hydrogen fluoride [air, urban air close to ground]: 7.40149e-14 kg
- Iron ion [air, urban air close to ground]: 9.51201e-13 kg
- Lead II [air, unspecified]: 1.64023e-11 kg
- Lead II [air, urban air close to ground]: 6.68809e-12 kg
- Magnesium [air, unspecified]: 2.36193e-10 kg
- Magnesium [air, urban air close to ground]: 9.38864e-11 kg
- Manganese II [air, unspecified]: 1.11535e-10 kg
- Manganese II [air, urban air close to ground]: 4.43352e-11 kg
- Mercury II [air, unspecified]: 1.96827e-13 kg
- Mercury II [air, urban air close to ground]: 8.03026e-14 kg
- Methane, fossil [air, low population density, long-term]: 1.90699e-11 kg
- Methane, fossil [air, urban air close to ground]: 6.36107e-11 kg
- Methane, non-fossil [air, unspecified]: 1.96827e-9 kg
- Methane, non-fossil [air, urban air close to ground]: 4.20806e-10 kg
- Methanol [air, non-urban air or from high stacks]: 1.74688e-9 kg
- Methanol [air, unspecified]: 3.82152e-9 kg
- Methanol [air, urban air close to ground]: 2.31695e-10 kg
- Molybdenum VI [air, urban air close to ground]: 9.28001e-15 kg
- NMVOC, non-methane volatile organic compounds [air, unspecified]: 1.06762e-7 kg
- NMVOC, non-methane volatile organic compounds [air, urban air close to ground]: 3.99619e-8 kg
- Nickel II [air, unspecified]: 3.93655e-12 kg
- Nickel II [air, urban air close to ground]: 2.13317e-12 kg
- Nitrogen oxides [air, non-urban air or from high stacks]: 8.98393e-6 kg
- Nitrogen oxides [air, unspecified]: 1.4762e-7 kg
- Nitrogen oxides [air, urban air close to ground]: 5.32587e-8 kg
- PAH, polycyclic aromatic hydrocarbons [air, unspecified]: 7.28261e-12 kg
- PAH, polycyclic aromatic hydrocarbons [air, urban air close to ground]: 3.18715e-12 kg
- Particulate Matter, < 2.5 um [air, unspecified]: 2.95241e-8 kg
- Particulate Matter, < 2.5 um [air, urban air close to ground]: 5.43685e-9 kg
- Particulate Matter, > 10 um [air, unspecified]: 2.95386e-8 kg
- Particulate Matter, > 10 um [air, urban air close to ground]: 2.784e-12 kg
- Particulate Matter, > 2.5 um and < 10um [air, unspecified]: 1.64023e-9 kg
- Particulate Matter, > 2.5 um and < 10um [air, urban air close to ground]: 5.23939e-10 kg
- Pentane [air, urban air close to ground]: 3.52839e-11 kg
- Phenol, pentachloro- [air, unspecified]: 5.31434e-15 kg
- Phenol, pentachloro- [air, urban air close to ground]: 2.11244e-15 kg
- Phosphorus [air, unspecified]: 1.96827e-10 kg
- Phosphorus [air, urban air close to ground]: 7.82386e-11 kg
- Potassium I [air, unspecified]: 1.53525e-8 kg
- Potassium I [air, urban air close to ground]: 6.10261e-9 kg
- Propane [air, urban air close to ground]: 5.88509e-12 kg
- Propionic acid [air, urban air close to ground]: 5.80935e-13 kg
- Propylene oxide [air, urban air close to ground]: 4.20608e-10 kg
- Selenium IV [air, urban air close to ground]: 1.392e-14 kg
- Sodium [air, unspecified]: 8.52918e-10 kg
- Sodium [air, urban air close to ground]: 3.39904e-10 kg
- Sulfur dioxide [air, unspecified]: 1.64023e-9 kg
- Sulfur dioxide [air, urban air close to ground]: 1.50374e-9 kg
- Toluene [air, unspecified]: 1.96827e-10 kg
- Toluene [air, urban air close to ground]: 2.81968e-10 kg
- Vanadium V [air, urban air close to ground]: 1.16e-12 kg
- Water [air, non-urban air or from high stacks]: 0.000212926 m3
- Water [air, unspecified]: 1.22809e-7 m3
- Water [air, urban air close to ground]: 1.20375e-8 m3
- Xylene [air, urban air close to ground]: 1.97825e-10 kg
- Zinc II [air, unspecified]: 1.96827e-10 kg
- Zinc II [air, urban air close to ground]: 7.97285e-11 kg
- m-Xylene [air, unspecified]: 7.87309e-11 kg
- m-Xylene [air, urban air close to ground]: 3.12955e-11 kg
- Azoxystrobin [soil, agricultural]: 1.38383e-7 kg
- Cadmium II [soil, agricultural]: 1.07892e-8 kg
- Chlorothalonil [soil, agricultural]: 5.2702e-10 kg
- Chlorpyrifos methyl [soil, agricultural]: 2.17988e-8 kg
- Chromium III [soil, agricultural]: 1.11688e-7 kg
- Copper ion [soil, agricultural]: 5.17342e-7 kg
- Cyproconazole [soil, agricultural]: 2.30157e-7 kg
- Ethofumesate [soil, agricultural]: 3.9903e-9 kg
- Fenpropimorph [soil, agricultural]: 1.12933e-9 kg
- Fungicides, unspecified [soil, agricultural]: 1.9048e-10 kg
- Glyphosate [soil, agricultural]: 1.62079e-7 kg
- Hexaconazole [soil, agricultural]: 6.06616e-8 kg
- Lead II [soil, agricultural]: 3.58763e-8 kg
- Mercury II [soil, agricultural]: 2.04161e-10 kg
- Metaldehyde [soil, agricultural]: 6.02311e-10 kg
- Metamitron [soil, agricultural]: 1.52083e-8 kg
- Nickel II [soil, agricultural]: 1.59363e-8 kg
- Paraquat [soil, agricultural]: 2.36442e-7 kg
- Phenmedipham [soil, agricultural]: 2.78567e-9 kg
- Pyraclostrobin [soil, agricultural]: 1.10557e-7 kg
- Terbufos [soil, agricultural]: 3.02646e-7 kg
- Thiamethoxam [soil, agricultural]: 1.84261e-7 kg
- Zinc II [soil, agricultural]: 1.60347e-7 kg
- AOX, Adsorbable Organic Halogen [water, surface water]: 3.35074e-10 kg
- BOD5, Biological Oxygen Demand [water, ground-]: 0.000518215 kg
- BOD5, Biological Oxygen Demand [water, surface water]: 8.32776e-8 kg
- COD, Chemical Oxygen Demand [water, ground-]: 0.00103643 kg
- COD, Chemical Oxygen Demand [water, surface water]: 1.62488e-7 kg
- Cadmium II [water, ground-]: 3.24007e-11 kg
- Cadmium II [water, surface water]: 1.43468e-10 kg
- Calcium II [water, surface water]: 1.24301e-10 kg
- Carbonate [water, surface water]: 1.20606e-9 kg
- Chloride [water, surface water]: 2.48619e-8 kg
- Chlorine [water, surface water]: 1.5455e-9 kg
- Chromium III [water, ground-]: 1.4889e-8 kg
- Chromium III [water, surface water]: 1.3562e-8 kg
- Copper ion [water, ground-]: 2.60886e-9 kg
- Copper ion [water, surface water]: 2.00851e-8 kg
- DOC, Dissolved Organic Carbon [water, ground-]: 0.000383863 kg
- DOC, Dissolved Organic Carbon [water, surface water]: 5.95017e-8 kg
- Dissolved solids [water, surface water]: 2.07501e-7 kg
- Lead II [water, ground-]: 2.36108e-10 kg
- Lead II [water, surface water]: 7.06233e-9 kg
- Mercury II [water, ground-]: 2.97755e-11 kg
- Mercury II [water, surface water]: 3.19242e-11 kg
- Nickel II [water, ground-]: 8.69583e-12 kg
- Nickel II [water, surface water]: 9.92467e-9 kg
- Nitrate [water, ground-]: 0.000288872 kg
- Nitrogen [water, surface water]: 2.18375e-8 kg
- Oils, non-fossil [water, surface water]: 3.63366e-8 kg
- Phosphate [water, ground-]: 1.34053e-7 kg
- Phosphate [water, surface water]: 7.49962e-7 kg
- Phosphorus [water, surface water]: 3.55226e-7 kg
- Sodium [water, unspecified]: 7.90697e-10 kg
- Sulfur [water, surface water]: 3.3498e-10 kg
- Suspended solids, unspecified [water, surface water]: 9.24399e-8 kg
- TOC, Total Organic Carbon [water, ground-]: 0.000383863 kg
- TOC, Total Organic Carbon [water, surface water]: 5.95017e-8 kg
- Water [water, ground-]: 2.75381e-5 m3
- Water [water, surface water]: 0.00012258 m3
- Zinc II [water, ground-]: 1.61864e-8 kg
- Zinc II [water, surface water]: 2.42658e-8 kg
