# treatment of spent cation exchange resin from potable water production, municipal incineration

Dataset: EcoSpold 2, unit process
Geography: CH
Time period: 1994-01-01 to 2022-12-31
Technology level: outdated
Classification: EcoSpold01Categories: waste management/municipal incineration
Classification: ISIC rev.4 ecoinvent: 3821:Treatment and disposal of non-hazardous waste
Synonyms: exchange resin for drinking water production plus CATIONS from unpolluted water
Tags: Treatment; ConvertedDataset
Scenario: Business-as-Usual
System model: Allocation at the point of substitution
Generated by: Gabor Doka (obsolete)
Published in: Doka G. 2007
Database: ecoinvent
isCopyrightProtected: true

## General comment
Inventoried waste contains 100% cation exchange resin f. water; .
waste composition (wet, in ppm): upper heating value 11.35 MJ/kg; lower heating value 1.474 MJ/kg; H2O 496920; O 110250; H 19060; C 254640; S 73640; N 569.57; P n.a.; B n.a.; Cl 331.94; Br 258.64; F 4.178; I n.a.; Ag n.a.; As 0.54001; Ba 53.006; Cd 6.8422; Co 8.9784; Cr 11.614; Cu 31.537; Hg 0.24133; Mn 22.714; Mo n.a.; Ni 5.8546; Pb 4.379; Sb 12.212; Se 0.59685; Sn 7.448; V 81.897; Zn 244.71; Be 0.14211; Sc n.a.; Sr 25.153; Ti 284.22; Tl 0.11369; W n.a.; Si n.a.; Fe 1058.9; Ca 33440; Al 56.843; K 940; Mg 2650; Na 5380;
Share of carbon in waste that is biogenic 0%.
Share of iron in waste that is metallic/recyclable 0%.
Net energy produced in MSWI: 0MJ/kg waste electric energy and 0MJ/kg waste thermal energy
Allocation of energy production: no substitution or expansion. Total burden allocated to waste disposal function of MSWI.
One kg of this waste produces 0.1557 kg of slag and 0.08015 kg of residues, which are landfilled. Additional solidification with 0.03206 kg of cement.
[This dataset was already contained in the ecoinvent database version 2. It was not individually updated during the transfer to ecoinvent version 3. Life Cycle Impact Assessment results may still have changed, as they are affected by changes in the supply chain, i.e. in other datasets. This dataset was generated following the ecoinvent quality guidelines for version 2. It may have been subject to central changes described in the ecoinvent version 3 change report (http://www.ecoinvent.org/database/ecoinvent-version-3/reports-of-changes/), and the results of the central updates were reviewed extensively. The changes added e.g. consistent water flows and other information throughout the database. The documentation of this dataset can be found in the ecoinvent reports of version 2, which are still available via the ecoinvent website. The change report linked above covers all central changes that were made during the conversion process.]

## Included activities end
waste-specific air and water emisions from incineration, auxiliary material consumption for flue gas cleaning. Short-term emissions to river water and long-term emisisons to ground water from slag compartment (from bottom slag) and residual material landfill (from solidified fly ashes and scrubber slugde). Process energy demands for MSWI.

## Geography
Specific to the technology mix encountered in Switzerland in 2000. Well applicable to modern incineration practices in Europe, North America or Japan.

## Technology
replaced by newer incineration technology with fly ash extraction. Average Swiss MSWI plants in 2000 with electrostatic precipitator for fly ash (ESP), wet flue gas scrubber and 29.4% SNCR , 32.2% SCR-high dust , 24.6% SCR-low dust -DeNOx facilities and 13.8% without Denox (by burnt waste, according to Swiss average). Share of waste incinerated in plants with magnetic scrap separation from slag : 50%. Gross electric efficiency technology mix 12.997% and Gross thermal efficiency technology mix 25.57%

## Time period
Waste composition as given in literature reference, theoretical data or other source. Transfer coefficients for modern Swiss MSWI. Emission speciation based on early 90ies data.

## Parameters
- fraction, process water, to air: 1 dimensionless; name fraction_PW_to_air; lognormal variance with pedigree 0.092025, pedigree (4,4,3,2,4)
  Calculated value. During incineration all water incorporated in the products entering the incinerator evaporate to air.

## Reference product
- spent cation exchange resin from potable water production: -1 kg; By-product classification Waste; CPC 39: Wastes or scraps
  EcoSpold01Location=CH
  production volume 0 kg
    outdated. Replaced by newer incineration technology with fly ash extraction.
  property carbon content, fossil 0.512
    Tab A.12, ecoinvent v2.2 report 13_I, c content is referred to 1 kg DM
  property heating value, net 1.47 MJ
    Value taken from the general comment of the treatment dataset.
  property price 0 EUR2005
    Waste products are assigned a price of zero as they are assumed to require further treatment.
  properties: carbon allocation 0.256 kg, carbon content 0.512, carbon content, non-fossil 0, dry mass 0.5 kg, water content 1, water in wet mass 0.5 kg, wet mass 1 kg

## Inputs from technosphere
- ammonia, anhydrous, liquid: 2.87e-5 kg; lognormal variance with pedigree 1.68, pedigree (1,1,5,1,1)
  uncertainty calculated from uncertainty in average DeNOx input, uncertainty in the share of thermal NOx, uncertainty of nitrogen content in average municipal waste and the unertainty in nitrogen content in *this* waste.
  EcoSpold01Location=CH
  properties: dry mass 1 kg, wet mass 1 kg
- cement, unspecified: 0.0321 kg; lognormal variance with pedigree 0.09, pedigree (1,1,5,1,1)
  EcoSpold01Location=CH
  Cement for solidification of landfilled residual material. Uncertainty calculated from unertainty of the waste composition of this waste, of transfer coefficients in the incinerator and of the solidification recipe.
  properties: dry mass 1 kg, wet mass 1 kg
- chemical, inorganic: 3.56e-5 kg; lognormal variance with pedigree 0.12, pedigree (1,1,5,1,1)
  EcoSpold01Location=GLO
  Proxy for Polyelectrolyte. uncertainty calculated from uncertainty in average auxiliary material input, and the unertainty of the waste composition of this waste
  properties: carbon content, fossil 0.003, dry mass 1 kg, wet mass 1 kg
  note on carbon content, fossil: This dataset is an unweighted average of 20 inorganic substances (listed in Tab 88.1, ecoinvent v2.2 report 8, part II), being part of the top100 chemicals included in this database. The C-content has also been calculated as an unweighted average of the C content of the substances composing this dataset.
- chemical, organic: 2.78e-5 kg; lognormal variance with pedigree 1.33, pedigree (1,1,5,1,1)
  EcoSpold01Location=GLO
  Proxy for TMT15. uncertainty calculated from uncertainty in average auxiliary material input, and the unertainty of the waste composition of this waste
  properties: carbon content, fossil 0.628, dry mass 1 kg, heating value, net 19.03 MJ, wet mass 1 kg
  note on carbon content, fossil: This dataset is an unweighted average of 20 organic substances (listed in Tab 88.1, ecoinvent v2.2 report 8, part II), being part of the top100 chemicals included in this database. The C-content has also been calculated as an unweighted average of the C content of the substances composing this dataset.
- chromium oxide, flakes: 1.68e-8 kg; lognormal variance with pedigree 2.39, pedigree (1,1,5,1,1)
  EcoSpold01Location=RER
  Proxy for vanadium pentoxide V2O5 in SCR catalyst, uncertainty calculated from uncertainty in average DeNOx input, uncertainty in the share of thermal NOx, uncertainty of nitrogen content in average municipal waste and the unertainty in nitrogen content in *this* waste.
  properties: dry mass 1 kg, wet mass 1 kg
- electricity, for reuse in municipal waste incineration only: 0.0906 kWh; name E_el_prod_MSWI; lognormal variance with pedigree 0.5, pedigree (1,1,5,1,1)
  uncertainty is calculated from uncertainties in waste composition and uncertainties in energy efficiency and the uncertainty in internal energy demand
- heat, district or industrial, natural gas: 0.00252 MJ; lognormal variance with pedigree 1.68, pedigree (1,1,5,1,1)
  uncertainty calculated from uncertainty in average DeNOx input, uncertainty in the share of thermal NOx, uncertainty of nitrogen content in average municipal waste and the unertainty in nitrogen content in *this* waste.
  EcoSpold01Location=RER
  properties: heating value, net 1 MJ
- heat, for reuse in municipal waste incineration only: 0.462 MJ; name E_th_prod_MSWI; lognormal variance with pedigree 0.04, pedigree (1,1,5,1,1)
  (same comment as for electricity, for reuse in municipal waste incineration only)
- hydrochloric acid, without water, in 30% solution state: 2.14e-5 kg; lognormal variance with pedigree 0.12, pedigree (1,1,5,1,1)
  EcoSpold01Location=RER
  uncertainty calculated from uncertainty in average auxiliary material input, and the unertainty of the waste composition of this waste
  properties: dry mass 1 kg, heating value, net 3.32 MJ, wet mass 1 kg
- iron (III) chloride, without water, in 40% solution state: 3.09e-5 kg; lognormal variance with pedigree 0.67, pedigree (1,1,5,1,1)
  EcoSpold01Location=CH
  uncertainty calculated from uncertainty in average auxiliary material input, and the unertainty of the waste composition of this waste
  properties: dry mass 1 kg, wet mass 1 kg
- municipal waste incineration facility: 2.5e-10 unit; lognormal variance with pedigree 0.04, pedigree (1,1,5,1,1)
  demands per kilogram waste. uncertainty is heeded in the module
  EcoSpold01Location=CH
- process-specific burdens, municipal waste incineration: 1 kg; lognormal variance with pedigree 0.04, pedigree (1,1,5,1,1)
  demands per kilogram waste. uncertainty is heeded in the module;activityLink introduced to establish a direct link to the corresponding regional supply of this product
  EcoSpold01Location=CH
- process-specific burdens, residual material landfill: 0.0801 kg; lognormal variance with pedigree 0.08, pedigree (1,1,5,1,1)
  EcoSpold01Location=CH
  uncertainty is calculated from uncertainties in waste composition and transfer coefficients in incinerator;activityLink introduced to establish a direct link to the corresponding regional supply of this product
- process-specific burdens, slag landfill: 0.156 kg; lognormal variance with pedigree 0.09, pedigree (1,1,5,1,1)
  (same comment as for process-specific burdens, residual material landfill)
- quicklime, milled, packed: 5.76e-5 kg; lognormal variance with pedigree 0.84, pedigree (1,1,5,1,1)
  uncertainty calculated from uncertainty in average auxiliary material input, and the unertainty of the waste composition of this waste
  EcoSpold01Location=CH
  properties: dry mass 0.99 kg, water content 0.010101, wet mass 1 kg
- residual material landfill: 1.67e-10 unit; lognormal variance with pedigree 0.08, pedigree (1,1,5,1,1)
  uncertainty is calculated from uncertainties in waste composition and transfer coefficients in incinerator
  EcoSpold01Location=CH
- slag landfill: 2.77e-10 unit; lognormal variance with pedigree 0.09, pedigree (1,1,5,1,1)
  EcoSpold01Location=CH
  uncertainty is calculated from uncertainties in waste composition and transfer coefficients in incinerator
- sodium hydroxide, without water, in 50% solution state: 0.0272 kg; lognormal variance with pedigree 0.13, pedigree (1,1,5,1,1)
  uncertainty calculated from uncertainty in average auxiliary material input, and the unertainty of the waste composition of this waste
  EcoSpold01Location=RER
  properties: dry mass 1 kg, heating value, net 3.03 MJ, wet mass 1 kg
- titanium dioxide: 8.23e-7 kg; lognormal variance with pedigree 2.39, pedigree (1,1,5,1,1)
  EcoSpold01Location=RER
  uncertainty calculated from uncertainty in average DeNOx input, uncertainty in the share of thermal NOx, uncertainty of nitrogen content in average municipal waste and the unertainty in nitrogen content in *this* waste.
  properties: dry mass 1 kg, wet mass 1 kg
- waste cement, hydrated: -0.0801 kg; name BP_amount_1; lognormal variance with pedigree 0.05, pedigree (1,1,1,1,1)
  Hydrated cement for solidification of landfilled residual material. Uncertainty calculated from unertainty of the waste composition of this waste and transfer coefficients in the incinerator and of the solidification recipe.
  EcoSpold01Location=CH
  production volume
    Calculated from the production volume of spent cation exchange resin from potable water production, 50% water in proportion to the respective output amounts.
  properties: dry mass 1 kg, wet mass 1 kg

## Emissions to nature
- Aluminium III [air, urban air close to ground]: 8.88e-8 kg; lognormal variance with pedigree 1.09, pedigree (1,1,5,1,1)
  uncertainty is calculated from uncertainties in waste composition and transfer coefficients in incinerator
- Ammonia [air, urban air close to ground]: 4.51e-7 kg; lognormal variance with pedigree 1.8, pedigree (1,1,5,1,1)
  uncertainty calculated from uncertainty in average N-emissions, uncertainty in the share of thermal NOx, uncertainty of nitrogen content in average municipal waste and the unertainty in nitrogen content in *this* waste.
- Antimony ion [air, urban air close to ground]: 4.75e-14 kg; lognormal variance with pedigree 1.41, pedigree (1,1,5,1,1)
  (same comment as for Aluminium III)
- Arsenic ion [air, urban air close to ground]: 5.51e-15 kg; lognormal variance with pedigree 1.8, pedigree (1,1,5,1,1)
  (same comment as for Aluminium III)
- Barium II [air, urban air close to ground]: 5.3e-8 kg; lognormal variance with pedigree 1.11, pedigree (1,1,5,1,1)
  (same comment as for Aluminium III)
- Beryllium II [air, urban air close to ground]: 1.42e-10 kg; lognormal variance with pedigree 1.88, pedigree (1,1,5,1,1)
  (same comment as for Aluminium III)
- Bromine [air, urban air close to ground]: 7.76e-7 kg; lognormal variance with pedigree 0.89, pedigree (1,1,5,1,1)
  (same comment as for Aluminium III)
- Cadmium II [air, urban air close to ground]: 3.77e-10 kg; lognormal variance with pedigree 1.39, pedigree (1,1,5,1,1)
  (same comment as for Aluminium III)
- Calcium [air, urban air close to ground]: 5.57e-5 kg; lognormal variance with pedigree 0.28, pedigree (1,1,5,1,1)
  (same comment as for Aluminium III)
- Carbon dioxide, fossil [air, urban air close to ground]: 0.923 kg; lognormal variance with pedigree 0.09, pedigree (1,1,5,1,1)
  (same comment as for Aluminium III)
- Carbon monoxide, fossil [air, urban air close to ground]: 0.000223 kg; lognormal variance with pedigree 0.690625, pedigree (1,3,5,2,1)
  Literature data from switzerland and germany adapted to plant age distribution in switzerland
  Uncertainty: & basic uncertainty of 5; literature data from switzerland and germany adapted to plant age distribution in switzerland
- Chromium III [air, urban air close to ground]: 8.59e-13 kg; lognormal variance with pedigree 1.39, pedigree (1,1,5,1,1)
  (same comment as for Aluminium III)
- Cobalt II [air, urban air close to ground]: 2.85e-13 kg; lognormal variance with pedigree 1.43, pedigree (1,1,5,1,1)
  (same comment as for Aluminium III)
- Copper ion [air, urban air close to ground]: 2.33e-10 kg; lognormal variance with pedigree 1.21, pedigree (1,1,5,1,1)
  (same comment as for Aluminium III)
- Cyanide [air, urban air close to ground]: 5.13e-7 kg; lognormal variance with pedigree 1.8, pedigree (1,1,5,1,1)
  (same comment as for Ammonia)
- Dinitrogen monoxide [air, urban air close to ground]: 2.41e-6 kg; lognormal variance with pedigree 1.8, pedigree (1,1,5,1,1)
  (same comment as for Ammonia)
- Hydrochloric acid [air, urban air close to ground]: 3.69e-9 kg; lognormal variance with pedigree 0.89, pedigree (1,1,5,1,1)
  (same comment as for Aluminium III)
- Hydrogen fluoride [air, urban air close to ground]: 2.2e-9 kg; lognormal variance with pedigree 1.44, pedigree (1,1,5,1,1)
  (same comment as for Aluminium III)
- Iron ion [air, urban air close to ground]: 3.54e-8 kg; lognormal variance with pedigree 0.73, pedigree (1,1,5,1,1)
  (same comment as for Aluminium III)
- Lead II [air, urban air close to ground]: 1.63e-10 kg; lognormal variance with pedigree 1.46, pedigree (1,1,5,1,1)
  (same comment as for Aluminium III)
- Magnesium [air, urban air close to ground]: 3.65e-6 kg; lognormal variance with pedigree 0.59, pedigree (1,1,5,1,1)
  (same comment as for Aluminium III)
- Manganese II [air, urban air close to ground]: 1.24e-13 kg; lognormal variance with pedigree 1.32, pedigree (1,1,5,1,1)
  (same comment as for Aluminium III)
- Mercury II [air, urban air close to ground]: 8.34e-15 kg; lognormal variance with pedigree 1.89, pedigree (1,1,5,1,1)
  (same comment as for Aluminium III)
- Methane, fossil [air, urban air close to ground]: 6.38e-6 kg; lognormal variance with pedigree 0.091225, pedigree (2,3,5,2,1)
  Confidential data from 5 plants in Switzerland and Germany
  Uncertainty: & basic uncertainty of 1.5; confidential data from 5 plants in Switzerland and Germany
- Nickel II [air, urban air close to ground]: 2.53e-13 kg; lognormal variance with pedigree 1.48, pedigree (1,1,5,1,1)
  (same comment as for Aluminium III)
- Nitrogen oxides [air, urban air close to ground]: 1.81e-5 kg; lognormal variance with pedigree 1.8, pedigree (1,1,5,1,1)
  (same comment as for Ammonia)
- Potassium I [air, urban air close to ground]: 2.83e-6 kg; lognormal variance with pedigree 0.72, pedigree (1,1,5,1,1)
  (same comment as for Aluminium III)
- Selenium IV [air, urban air close to ground]: 3e-15 kg; lognormal variance with pedigree 1.8, pedigree (1,1,5,1,1)
  (same comment as for Aluminium III)
- Sodium [air, urban air close to ground]: 5.06e-5 kg; lognormal variance with pedigree 0.49, pedigree (1,1,5,1,1)
  (same comment as for Aluminium III)
- Strontium [air, urban air close to ground]: 2.52e-9 kg; lognormal variance with pedigree 1.22, pedigree (1,1,5,1,1)
  (same comment as for Aluminium III)
- Sulfur dioxide [air, urban air close to ground]: 0.000314 kg; lognormal variance with pedigree 0.21, pedigree (1,1,5,1,1)
  (same comment as for Aluminium III)
- Thallium I [air, urban air close to ground]: 1.14e-10 kg; lognormal variance with pedigree 1.91, pedigree (1,1,5,1,1)
  (same comment as for Aluminium III)
- Tin ion [air, urban air close to ground]: 9.88e-9 kg; lognormal variance with pedigree 1.36, pedigree (1,1,5,1,1)
  (same comment as for Aluminium III)
- Titanium ion [air, urban air close to ground]: 2.84e-7 kg; lognormal variance with pedigree 0.88, pedigree (1,1,5,1,1)
  (same comment as for Aluminium III)
- Vanadium V [air, urban air close to ground]: 8.19e-9 kg; lognormal variance with pedigree 1.06, pedigree (1,1,5,1,1)
  (same comment as for Aluminium III)
- Water [air, unspecified]: 0.0005 m3; name water_to_air_unspecified; lognormal variance with pedigree 0.0807, pedigree (2,2,5,1,1)
  Calculated value based on water balance.
  property carbon content, fossil 0; name C_content_fossil
  property carbon content, non-fossil 0; name C_content_non_fossil
  property fraction, origin: fresh water 0; name fraction_origin_fresh_water
  property fraction, origin: salt water 0; name fraction_origin_salt_water
  property fraction, origin: unspecified 1; name fraction_origin_unspecified
  property water in wet mass 1000 kg; name WWM
- Zinc II [air, urban air close to ground]: 4e-9 kg; lognormal variance with pedigree 0.93, pedigree (1,1,5,1,1)
  (same comment as for Aluminium III)
- Aluminium III [water, ground-, long-term]: 4.21e-5 kg; lognormal variance with pedigree 1.01, pedigree (1,1,5,1,1)
  Long-term emissions from landfilling of incineration residues. uncertainty is calculated from uncertainties in waste composition and transfer coefficients in incinerator and landfills.
- Aluminium III [water, surface water]: 4.73e-9 kg; lognormal variance with pedigree 1.33, pedigree (1,1,5,1,1)
  uncertainty is calculated from uncertainties in waste composition and transfer coefficients in incinerator and landfills
- Antimony ion [water, ground-, long-term]: 7.8e-6 kg; lognormal variance with pedigree 1.06, pedigree (1,1,5,1,1)
  (same comment as for Aluminium III)
- Antimony ion [water, surface water]: 4.24e-6 kg; lognormal variance with pedigree 1.09, pedigree (1,1,5,1,1)
  (same comment as for Aluminium III)
- Arsenic ion [water, ground-, long-term]: 2.97e-7 kg; lognormal variance with pedigree 1.68, pedigree (1,1,5,1,1)
  (same comment as for Aluminium III)
- Arsenic ion [water, surface water]: 2.43e-7 kg; lognormal variance with pedigree 1.43, pedigree (1,1,5,1,1)
  (same comment as for Aluminium III)
- BOD5, Biological Oxygen Demand [water, ground-, long-term]: 0.00206 kg; lognormal variance with pedigree 0.08, pedigree (1,1,5,1,1)
  (same comment as for Aluminium III)
- BOD5, Biological Oxygen Demand [water, surface water]: 9.53e-6 kg; lognormal variance with pedigree 0.18, pedigree (1,1,5,1,1)
  (same comment as for Aluminium III)
- Barium II [water, ground-, long-term]: 4.71e-5 kg; lognormal variance with pedigree 1.13, pedigree (1,1,5,1,1)
  (same comment as for Aluminium III)
- Barium II [water, surface water]: 7.29e-9 kg; lognormal variance with pedigree 1.96, pedigree (1,1,5,1,1)
  (same comment as for Aluminium III)
- Beryllium II [water, ground-, long-term]: 1.14e-7 kg; lognormal variance with pedigree 1.62, pedigree (1,1,5,1,1)
  (same comment as for Aluminium III)
- Beryllium II [water, surface water]: 8.83e-11 kg; lognormal variance with pedigree 2.09, pedigree (1,1,5,1,1)
  (same comment as for Aluminium III)
- Bromine [water, ground-, long-term]: 4.52e-5 kg; lognormal variance with pedigree 0.88, pedigree (1,1,5,1,1)
  (same comment as for Aluminium III)
- Bromine [water, surface water]: 0.000213 kg; lognormal variance with pedigree 0.72, pedigree (1,1,5,1,1)
  (same comment as for Aluminium III)
- COD, Chemical Oxygen Demand [water, ground-, long-term]: 0.00628 kg; lognormal variance with pedigree 0.08, pedigree (1,1,5,1,1)
  (same comment as for Aluminium III)
- COD, Chemical Oxygen Demand [water, surface water]: 1.7e-5 kg; lognormal variance with pedigree 0.31, pedigree (1,1,5,1,1)
  (same comment as for Aluminium III)
- Cadmium II [water, ground-, long-term]: 6.87e-8 kg; lognormal variance with pedigree 7.12, pedigree (1,1,5,1,1)
  (same comment as for Aluminium III)
- Cadmium II [water, surface water]: 3.1e-9 kg; lognormal variance with pedigree 1.32, pedigree (1,1,5,1,1)
  (same comment as for Aluminium III)
- Calcium II [water, ground-, long-term]: 0.0291 kg; lognormal variance with pedigree 0.26, pedigree (1,1,5,1,1)
  (same comment as for Aluminium III)
- Calcium II [water, surface water]: 0.000126 kg; lognormal variance with pedigree 0.73, pedigree (1,1,5,1,1)
  (same comment as for Aluminium III)
- Chloride [water, ground-, long-term]: 7.83e-6 kg; lognormal variance with pedigree 0.43, pedigree (1,1,5,1,1)
  (same comment as for Aluminium III)
- Chloride [water, surface water]: 0.000324 kg; lognormal variance with pedigree 0.77, pedigree (1,1,5,1,1)
  (same comment as for Aluminium III)
- Chromium III [water, surface water]: 3.7e-8 kg; lognormal variance with pedigree 1.3, pedigree (1,1,5,1,1)
  (same comment as for Aluminium III)
- Chromium VI [water, ground-, long-term]: 1.23e-6 kg; lognormal variance with pedigree 1.5, pedigree (1,1,5,1,1)
  (same comment as for Aluminium III)
- Chromium VI [water, surface water]: 3.78e-7 kg; lognormal variance with pedigree 1.21, pedigree (1,1,5,1,1)
  (same comment as for Aluminium III)
- Cobalt II [water, ground-, long-term]: 7.86e-6 kg; lognormal variance with pedigree 1.27, pedigree (1,1,5,1,1)
  (same comment as for Aluminium III)
- Cobalt II [water, surface water]: 1.54e-9 kg; lognormal variance with pedigree 1.76, pedigree (1,1,5,1,1)
  (same comment as for Aluminium III)
- Copper ion [water, ground-, long-term]: 2.55e-5 kg; lognormal variance with pedigree 1.12, pedigree (1,1,5,1,1)
  (same comment as for Aluminium III)
- Copper ion [water, surface water]: 1.28e-9 kg; lognormal variance with pedigree 1.76, pedigree (1,1,5,1,1)
  (same comment as for Aluminium III)
- DOC, Dissolved Organic Carbon [water, ground-, long-term]: 0.00249 kg; lognormal variance with pedigree 0.08, pedigree (1,1,5,1,1)
  (same comment as for Aluminium III)
- DOC, Dissolved Organic Carbon [water, surface water]: 6.98e-6 kg; lognormal variance with pedigree 0.3, pedigree (1,1,5,1,1)
  (same comment as for Aluminium III)
- Fluoride [water, ground-, long-term]: 3.73e-6 kg; lognormal variance with pedigree 1, pedigree (1,1,5,1,1)
  (same comment as for Aluminium III)
- Fluoride [water, surface water]: 3.21e-7 kg; lognormal variance with pedigree 1.05, pedigree (1,1,5,1,1)
  (same comment as for Aluminium III)
- Iron ion [water, ground-, long-term]: 0.000496 kg; lognormal variance with pedigree 1.44, pedigree (1,1,5,1,1)
  (same comment as for Aluminium III)
- Iron ion [water, surface water]: 3.62e-7 kg; lognormal variance with pedigree 0.68, pedigree (1,1,5,1,1)
  (same comment as for Aluminium III)
- Lead II [water, ground-, long-term]: 3.12e-7 kg; lognormal variance with pedigree 7.44, pedigree (1,1,5,1,1)
  (same comment as for Aluminium III)
- Lead II [water, surface water]: 1.22e-10 kg; lognormal variance with pedigree 1.38, pedigree (1,1,5,1,1)
  (same comment as for Aluminium III)
- Magnesium [water, ground-, long-term]: 0.00245 kg; lognormal variance with pedigree 0.56, pedigree (1,1,5,1,1)
  (same comment as for Aluminium III)
- Magnesium [water, surface water]: 9.28e-6 kg; lognormal variance with pedigree 1.05, pedigree (1,1,5,1,1)
  (same comment as for Aluminium III)
- Manganese II [water, ground-, long-term]: 1.96e-5 kg; lognormal variance with pedigree 1.28, pedigree (1,1,5,1,1)
  (same comment as for Aluminium III)
- Manganese II [water, surface water]: 1.27e-9 kg; lognormal variance with pedigree 1.96, pedigree (1,1,5,1,1)
  (same comment as for Aluminium III)
- Mercury II [water, ground-, long-term]: 1.26e-8 kg; lognormal variance with pedigree 3.54, pedigree (1,1,5,1,1)
  (same comment as for Aluminium III)
- Mercury II [water, surface water]: 2.58e-9 kg; lognormal variance with pedigree 1.76, pedigree (1,1,5,1,1)
  (same comment as for Aluminium III)
- Nickel II [water, ground-, long-term]: 5.48e-6 kg; lognormal variance with pedigree 1.33, pedigree (1,1,5,1,1)
  (same comment as for Aluminium III)
- Nickel II [water, surface water]: 3.67e-9 kg; lognormal variance with pedigree 1.95, pedigree (1,1,5,1,1)
  (same comment as for Aluminium III)
- Nitrate [water, ground-, long-term]: 2.05e-5 kg; lognormal variance with pedigree 0.78, pedigree (1,1,5,1,1)
  (same comment as for Aluminium III)
- Nitrate [water, surface water]: 7.29e-6 kg; lognormal variance with pedigree 0.55, pedigree (1,1,5,1,1)
  (same comment as for Aluminium III)
- Potassium I [water, ground-, long-term]: 0.000774 kg; lognormal variance with pedigree 0.48, pedigree (1,1,5,1,1)
  (same comment as for Aluminium III)
- Potassium I [water, surface water]: 0.000163 kg; lognormal variance with pedigree 0.43, pedigree (1,1,5,1,1)
  (same comment as for Aluminium III)
- Selenium IV [water, ground-, long-term]: 4.01e-7 kg; lognormal variance with pedigree 1.16, pedigree (1,1,5,1,1)
  (same comment as for Aluminium III)
- Selenium IV [water, surface water]: 1.94e-7 kg; lognormal variance with pedigree 1.35, pedigree (1,1,5,1,1)
  (same comment as for Aluminium III)
- Sodium I [water, ground-, long-term]: 0.00417 kg; lognormal variance with pedigree 0.31, pedigree (1,1,5,1,1)
  (same comment as for Aluminium III)
- Sodium I [water, surface water]: 0.00116 kg; lognormal variance with pedigree 0.26, pedigree (1,1,5,1,1)
  (same comment as for Aluminium III)
- Strontium [water, ground-, long-term]: 2.51e-5 kg; lognormal variance with pedigree 1.18, pedigree (1,1,5,1,1)
  (same comment as for Aluminium III)
- Strontium [water, surface water]: 1.58e-8 kg; lognormal variance with pedigree 1.9, pedigree (1,1,5,1,1)
  (same comment as for Aluminium III)
- Sulfate [water, ground-, long-term]: 0.185 kg; lognormal variance with pedigree 0.11, pedigree (1,1,5,1,1)
  (same comment as for Aluminium III)
- Sulfate [water, surface water]: 0.0358 kg; lognormal variance with pedigree 0.12, pedigree (1,1,5,1,1)
  (same comment as for Aluminium III)
- TOC, Total Organic Carbon [water, ground-, long-term]: 0.00249 kg; lognormal variance with pedigree 0.08, pedigree (1,1,5,1,1)
  (same comment as for Aluminium III)
- TOC, Total Organic Carbon [water, surface water]: 6.98e-6 kg; lognormal variance with pedigree 0.3, pedigree (1,1,5,1,1)
  (same comment as for Aluminium III)
- Thallium I [water, ground-, long-term]: 6.63e-8 kg; lognormal variance with pedigree 1.44, pedigree (1,1,5,1,1)
  (same comment as for Aluminium III)
- Thallium I [water, surface water]: 6.96e-11 kg; lognormal variance with pedigree 2.06, pedigree (1,1,5,1,1)
  (same comment as for Aluminium III)
- Tin ion [water, ground-, long-term]: 3.74e-6 kg; lognormal variance with pedigree 1.68, pedigree (1,1,5,1,1)
  (same comment as for Aluminium III)
- Tin ion [water, surface water]: 2.76e-10 kg; lognormal variance with pedigree 1.42, pedigree (1,1,5,1,1)
  (same comment as for Aluminium III)
- Titanium ion [water, ground-, long-term]: 8.52e-5 kg; lognormal variance with pedigree 1.23, pedigree (1,1,5,1,1)
  (same comment as for Aluminium III)
- Titanium ion [water, surface water]: 1.37e-9 kg; lognormal variance with pedigree 2.22, pedigree (1,1,5,1,1)
  (same comment as for Aluminium III)
- Vanadium V [water, ground-, long-term]: 1.4e-5 kg; lognormal variance with pedigree 1.76, pedigree (1,1,5,1,1)
  (same comment as for Aluminium III)
- Vanadium V [water, surface water]: 5.53e-8 kg; lognormal variance with pedigree 1.22, pedigree (1,1,5,1,1)
  (same comment as for Aluminium III)
- Zinc II [water, ground-, long-term]: 3.79e-6 kg; lognormal variance with pedigree 5.5, pedigree (1,1,5,1,1)
  (same comment as for Aluminium III)
- Zinc II [water, surface water]: 4.5e-8 kg; lognormal variance with pedigree 0.79, pedigree (1,1,5,1,1)
  (same comment as for Aluminium III)

## Sampling procedure
waste-specific calculation based on literature data

## Extrapolations
Typical elemental transfer coefficients from current studies for modern MSWI, completed with data from coal power plants and estimates, adapted for inert/burnable waste.

## Review by Niels Jungbluth 2003-07-15
Passed. Calculation for standard deviation 95 of, i.e., infrastructure,
land occupation, transport services or other services can differ from
standard Pedigree approach used in this project and figures obtained by
this procedure.
