# synthetic graphite production, battery grade

Dataset: EcoSpold 2, unit process
Geography: CN
Time period: 2015-01-01 to 2022-12-31
Technology level: current
Classification: ISIC rev.4 ecoinvent: 2011:Manufacture of basic chemicals
Scenario: Business-as-Usual
System model: Allocation at the point of substitution
Generated by: Eleonora Crenna
Published in: Dunn, J.B. 2015
Database: ecoinvent
isCopyrightProtected: true

## General comment
The dataset represents the production of 1 kg synthetic graphite in China. Synthetic graphite is used as input material for the production of anode in commercial Lithium-ion batteries.
Reference:
Dunn, J. B., James, C., Gaines, L., Gallagher, K., Dai, Q., & Kelly, J. C. (2015). Material and energy flows in the production of cathode and anode materials for lithium ion batteries (No. ANL/ESD-14/10 Rev). Argonne National Lab.(ANL), Argonne, IL (United States).

## Included activities start
The activity starts with materials entering the system.

## Included activities end
The activity ends with the production of 1 kg synthetic graphite, battery grade. Emissions and infrastructure are included in the dataset.

## Geography
The production of synthetic graphite is assumed to be based in China, leader country in the global production of synthetic graphite in 2017 (USGS, 2017. Minerals Yearbook - Graphite)

## Technology
The industrial product process starts with grinding and sizing the petroleum coke, which is then sent to the mixer where it is blended with the coal tar pitch.The mixture coming out of the mixer is cooled from 160-170 °C to around 100°C, and then fed into an extruder for subsequent forming in order to maximize the density of the mixture and shape it into the form and size of the final product. The formed product is heated to 800-1000 °C in a natural gas-fired furnace (carbonization process). In the graphitization furnace, which is exclusively powered by
electricity, the mixture is slowly fired to around 3000 °C for the formation of graphite crystals.

Reference:
Dunn, J. B., James, C., Gaines, L., Gallagher, K., Dai, Q., & Kelly, J. C. (2015). Material and energy flows in the production of cathode and anode materials for lithium ion batteries (No. ANL/ESD-14/10 Rev). Argonne National Lab.(ANL), Argonne, IL (United States).

## Time period
The time period is from 2015 (year of the publication of data) and 2020 (year of the dataset)

## Reference product
- synthetic graphite, battery grade: 1 kg; name RefProd; By-product classification allocatable product; CPC 37950: Artificial graphite; colloidal or semi-colloidal graphite; preparations based on graphite or other carbon in t[…]; CAS 7782-42-5
  production volume 7.14e8 kg
    The production volume is expressed in kg. In 2017, China produced approximately 714,000 t of synthetic graphite from circa 29 plants, accounting for circa 48% of global synthetic graphite production.
  property carbon content, fossil 1; name RefProd_C_content_fossil
    fossil carbon content on a dry matter basis
  property carbon content, non-fossil 0; name RefProd_C_content_non_fossil
    biogene carbon content on a dry matter basis
  property price 0.760296 EUR2005
    Calculated based on inputs: The price of the product has been calculated as a sum of the values of the material and energy inputs for this product. This value is therefore a rough estimation. It may underestimate the real price since there are additional expenses when producing any product. These expences can include for example labour costs, treatment of waste materials and profit for the producer. Please consider carefully whether this level of data quality is acceptable for your application.
  property water content 0; name RefProd_water_content
  property water in wet mass 0 kg; name RefProd_WWM
  properties: carbon allocation 1 kg, carbon content 1, dry mass 1 kg, wet mass 1 kg

## Inputs from technosphere
- coal gas: -0.114465, -15.5239 MJ (2 suppliers, which the file names only by identifier); sum of these -15.6383 MJ
- coal tar: -0.114253 kg
- electricity, medium voltage: 0.000339425, 0.000955293, 9.13185e-5, 2.54393e-5, 0.000310381, 0.033368, 4.30978e-5, 0.00164075, 0.0104119, 0.00205702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 kWh (47 suppliers, which the file names only by identifier); sum of these 0.174582 kWh
- hard coal: 0.511091, 0.678158, 0.307501, 0.0360642, 2.17625, 0.313797, 0.239416, 0.458447, 0.133446, 0.0729676 kg (10 suppliers, which the file names only by identifier); sum of these 4.92714 kg
- hard coal coke factory: 6.02524e-11, 4.44269e-13 unit (2 suppliers, which the file names only by identifier); sum of these 6.06967e-11 unit
- iron sulfate: 0.000258731, 1.90774e-6 kg (2 suppliers, which the file names only by identifier); sum of these 0.000260639 kg
- phosphoric acid, fertiliser grade, without water, in 70% solution state: 3.81548e-6, 0.000517462 kg (2 suppliers, which the file names only by identifier); sum of these 0.000521277 kg
- sodium hydroxide, without water, in 50% solution state: 0.0072836 kg
- water, decarbonised: 1.93973, 0.258474, 0.05132, 0.000161644, 0.0418135, 0.0126894, 0.16875, 1.64657, 1.04249, 0.309232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 kg (13 suppliers, which the file names only by identifier); sum of these 5.71263 kg

## Emissions to nature
- Acetone [air, non-urban air or from high stacks]: 0.000149922 kg
- Acrolein [air, non-urban air or from high stacks]: 1.8501e-7 kg
- Aluminium III [air, non-urban air or from high stacks]: 5.33122e-7 kg
- Ammonia [air, non-urban air or from high stacks]: 2.19171e-5 kg
- Antimony ion [air, non-urban air or from high stacks]: 2.58256e-9 kg
- Arsenic ion [air, non-urban air or from high stacks]: 7.02139e-8 kg
- Barium II [air, non-urban air or from high stacks]: 8.56896e-8 kg
- Benzene [air, non-urban air or from high stacks]: 0.00382804 kg
- Benzo(a)pyrene [air, non-urban air or from high stacks]: 2.76823e-5 kg
- Beryllium II [air, non-urban air or from high stacks]: 1.3419e-9 kg
- Boron [air, non-urban air or from high stacks]: 1.71697e-9 kg
- Bromine [air, non-urban air or from high stacks]: 3.42348e-10 kg
- Cadmium II [air, non-urban air or from high stacks]: 1.20526e-9 kg
- Calcium [air, non-urban air or from high stacks]: 6.29816e-8 kg
- Carbon dioxide, fossil [air, non-urban air or from high stacks]: 0.569352 kg
- Carbon disulfide [air, non-urban air or from high stacks]: 3.31034e-6 kg
- Carbon monoxide, fossil [air, non-urban air or from high stacks]: 0.0602791 kg
- Chromium III [air, non-urban air or from high stacks]: 3.42648e-8 kg
- Cobalt II [air, non-urban air or from high stacks]: 9.793e-9 kg
- Copper ion [air, non-urban air or from high stacks]: 4.229e-8 kg
- Cyanide [air, non-urban air or from high stacks]: 1.16252e-5 kg
- Ethane [air, non-urban air or from high stacks]: 0.00101413 kg
- Ethanol [air, non-urban air or from high stacks]: 1.5134e-7 kg
- Ethylene [air, non-urban air or from high stacks]: 1.4687e-6 kg
- Ethyne [air, non-urban air or from high stacks]: 4.75629e-8 kg
- Hydrocarbons, aliphatic, unsaturated [air, non-urban air or from high stacks]: 4.75629e-8 kg
- Hydrogen sulfide [air, non-urban air or from high stacks]: 1.33542e-6 kg
- Iodine [air, non-urban air or from high stacks]: 6.29816e-11 kg
- Iron ion [air, non-urban air or from high stacks]: 2.19521e-7 kg
- Lead II [air, non-urban air or from high stacks]: 1.09968e-7 kg
- Magnesium [air, non-urban air or from high stacks]: 1.90774e-7 kg
- Manganese II [air, non-urban air or from high stacks]: 6.06755e-8 kg
- Mercury II [air, non-urban air or from high stacks]: 1.30729e-9 kg
- Methane, chlorodifluoro-, HCFC-22 [air, non-urban air or from high stacks]: 1.15897e-5 kg
- Methane, fossil [air, non-urban air or from high stacks]: 0.00932234 kg
- Methanol [air, non-urban air or from high stacks]: 1.5134e-5 kg
- Molybdenum VI [air, non-urban air or from high stacks]: 9.35577e-11 kg
- NMVOC, non-methane volatile organic compounds [air, non-urban air or from high stacks]: 0.0372174 kg
- Nickel II [air, non-urban air or from high stacks]: 7.6477e-8 kg
- Nitrogen oxides [air, non-urban air or from high stacks]: 0.00302493 kg
- PAH, polycyclic aromatic hydrocarbons [air, non-urban air or from high stacks]: 8.11635e-6 kg
- Particulate Matter, < 2.5 um [air, non-urban air or from high stacks]: 0.00876778 kg
- Particulate Matter, > 10 um [air, non-urban air or from high stacks]: 0.0147664 kg
- Particulate Matter, > 2.5 um and < 10um [air, non-urban air or from high stacks]: 0.00401134 kg
- Phenol, pentachloro- [air, non-urban air or from high stacks]: 1.21923e-5 kg
- Phosphorus [air, non-urban air or from high stacks]: 1.66172e-7 kg
- Potassium I [air, non-urban air or from high stacks]: 6.29816e-8 kg
- Propane [air, non-urban air or from high stacks]: 1.03749e-5 kg
- Propene [air, non-urban air or from high stacks]: 9.53871e-8 kg
- Scandium [air, non-urban air or from high stacks]: 1.23873e-10 kg
- Selenium IV [air, non-urban air or from high stacks]: 2.33171e-8 kg
- Silicon [air, non-urban air or from high stacks]: 7.8139e-7 kg
- Silver I [air, non-urban air or from high stacks]: 4.60754e-10 kg
- Sodium [air, non-urban air or from high stacks]: 3.13601e-8 kg
- Strontium [air, non-urban air or from high stacks]: 6.29816e-9 kg
- Styrene [air, non-urban air or from high stacks]: 1.55239e-7 kg
- Sulfur dioxide [air, non-urban air or from high stacks]: 0.00575317 kg
- Thallium I [air, non-urban air or from high stacks]: 5.41863e-9 kg
- Thorium [air, non-urban air or from high stacks]: 1.23873e-10 kg
- Tin ion [air, non-urban air or from high stacks]: 6.29816e-11 kg
- Titanium ion [air, non-urban air or from high stacks]: 1.90774e-8 kg
- Toluene [air, non-urban air or from high stacks]: 1.20626e-5 kg
- Uranium [air, non-urban air or from high stacks]: 6.29816e-11 kg
- Vanadium V [air, non-urban air or from high stacks]: 1.23873e-9 kg
- Water [air, unspecified]: 0.00221364 m3
- Zinc II [air, non-urban air or from high stacks]: 2.14891e-7 kg
- Zirconium [air, non-urban air or from high stacks]: 1.52619e-9 kg
- Ammonium [water, surface water]: 6.49811e-5 kg
- Chloride [water, surface water]: 0.00506996 kg
- Hydrogen sulfide [water, surface water]: 1.04255e-5 kg
- PAH, polycyclic aromatic hydrocarbons [water, surface water]: 7.81916e-8 kg
- Sodium I [water, surface water]: 0.00325974 kg
- Solids, inorganic [water, surface water]: 0.00286703 kg
- Water [water, unspecified]: 0.00349898 m3

## Sampling procedure
From literature.
