# treatment of waste polyethylene, for recycling, unsorted, sorting

Dataset: EcoSpold 2, unit process
Geography: CH
Time period: 2014-01-01 to 2022-12-31
Technology level: current
Classification: ISIC rev.4 ecoinvent: 3811:Collection of non-hazardous waste
Scenario: Business-as-Usual
System model: Allocation at the point of substitution
Generated by: Thomas Kägi
Published in: Kägi T. 2017
Database: ecoinvent
isCopyrightProtected: true

## General comment
The functional unit represents the treatment of unsorted waste polyethylene, for recycling, yielding 1 kg of sorted waste polyethylene, for recycling.
The collected PE packaging material is sorted by colours in one of five sorting centres in Switzerland and compressed to 200 to 300 kg heavy bales for further processing. Foreign substances are sorted out and disposed of. Data were derived from involved sorting facilities (confidential).
For further information see Kägi et al. (2017). Life Cycle Inventories for Swiss Recycling Processes - Part Carbotech: Recycling of Cardboard, Glass, PE, PET, Tinplate

## Included activities start
Service is starting with the receipt of unsorted waste PE

## Included activities end
This module includes all processes of the sorting of waste PE up to the factory gate. Machinery infrastructure is excluded

## Allocation
no allocation involved

## Reference product
- waste polyethylene, for recycling, sorted: 1 kg; name BP_waste_PE_sorted; By-product classification Recyclable; CPC 39270: Waste, parings and scrap of plastics; lognormal variance with pedigree 0.0006, pedigree (1,1,1,1,1)
  production volume 7.964e6 kg
    estimation based on Seyler et al. (2016; A2-1); production volumes of by-products and waste scaled accordingly
  property price 0.035 EUR2005
    Convert from EU 27 price to the world by currency exchange rate.
  properties: carbon allocation 0.824026 kg, carbon content 0.829, carbon content, fossil 0.829, carbon content, non-fossil 0, dry mass 0.994 kg, heating value, net 42.47 MJ, water content 0.00603622, water in wet mass 0.006 kg, wet mass 1 kg

## Inputs from technosphere
- aluminium, cast alloy: 6.1527e-5 kg
- carton board box production, with offset printing: 0.000674006 kg
- electricity, medium voltage: 0.00515803, 9.37789e-7, 1.11247e-5, 5.80032e-6, 1.29022e-5, 6.34511e-6, 1.01038e-5, 1.25354e-5, 2.63143e-6, 8.63284e-7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 kWh (31 suppliers, which the file names only by identifier); sum of these 0.027254 kWh
- extrusion of plastic sheets and thermoforming, inline: 2.99514e-6 kg
- extrusion, plastic film: 0.0102607 kg
- fish canning plant: 6.71042e-12 unit
- fish curing plant: 4.20713e-11 unit
- fish freezing plant: 2.17127e-10 unit
- heat, district or industrial, natural gas: 0.000829612 MJ
- heat, district or industrial, other than natural gas: 0.0287234 MJ
- metal working, average for chromium steel product manufacturing: 0.000312183 kg
- nitrogen, liquid: 1.69388e-7, 4.64959e-8 kg (2 suppliers, which the file names only by identifier); sum of these 2.15884e-7 kg
- packaging film, low density polyethylene: 3.33849e-6 kg
- packaging glass, white: 0.000161913 kg
- polyethylene terephthalate, granulate, amorphous: 2.18891e-5 kg
- polyethylene, high density, granulate: 3.73531e-6 kg
- polyethylene, low density, granulate: 0.0102599 kg
- scrap aluminium: -1.95168e-5, -9.15685e-7, -4.10945e-5 kg (3 suppliers, which the file names only by identifier); sum of these -6.1527e-5 kg
- scrap tin sheet: -7.2479e-5, -0.00479757 kg (2 suppliers, which the file names only by identifier); sum of these -0.00487005 kg
- sheet rolling, aluminium: 6.1527e-5 kg
- sodium chloride, powder: 0.026874 kg
- thermoforming of plastic sheets: 2.18891e-5 kg
- tin plated chromium steel sheet, 2 mm: 0.000312183 m2
- vegetable oil, refined: 0.0032385 kg
- waste packaging glass, unsorted: -0.000161913 kg
- waste polyethylene, for recycling, unsorted: -0.00257138, -0.00257138, -0.00257138, -0.00257138 kg (4 suppliers, which the file names only by identifier); sum of these -0.0102855 kg
- wastewater from vegetable oil refinery: -0.00133012 m3
- water, completely softened: 0.521022, 0.724891, 0.968389 kg (3 suppliers, which the file names only by identifier); sum of these 2.2143 kg

## Emissions to nature
- BOD5, Biological Oxygen Demand [water, unspecified]: 7.78737e-7 kg
- COD, Chemical Oxygen Demand [water, unspecified]: 4.85213e-6 kg
- DOC, Dissolved Organic Carbon [water, unspecified]: 1.23799e-6 kg
- Nitrogen [water, unspecified]: 1.80497e-5 kg
- Oils, non-fossil [water, ocean]: 5.82907e-5 kg
- Phosphorus [water, unspecified]: 5.45117e-6 kg
- TOC, Total Organic Carbon [water, unspecified]: 1.23799e-6 kg

## Sampling procedure
Uncertainty estimation according to the pedigree matrix

## Review by Ivan Muñoz Ortiz 2017-08-10
An offline review in excel has been carried out for all the PE recycling activities, checking mass balances, data sources, etc. Several comments were made to the data provider and improvements have been made to the datasets.
