# treatment of waste wood, untreated, sanitary landfill

Dataset: EcoSpold 2, unit process
Geography: RoW
Time period: 1994-01-01 to 2022-12-31
Technology level: current
Classification: ISIC rev.4 ecoinvent: 3821:Treatment and disposal of non-hazardous waste
Classification: EcoSpold01Categories: waste management/sanitary landfill
Tags: Treatment; ConvertedDataset
Scenario: Business-as-Usual
System model: Allocation at the point of substitution
Generated by: Gabor Doka (obsolete)
Published in: Doka G. 2007
Database: ecoinvent
isCopyrightProtected: true

## General comment
Inventoried waste contains 100% natural wood; .
waste composition (wet, in ppm): upper heating value 15.36 MJ/kg; lower heating value 13.99 MJ/kg; H2O 174080; O 372180; H 50163; C 401470; S 125.51; N 986.98; P 108.97; B 2.1107; Cl 330.95; Br n.a.; F 21.106; I n.a.; Ag n.a.; As 0.42213; Ba n.a.; Cd 0.20051; Co 0.086772; Cr 0.65782; Cu 4.1482; Hg 0.31976; Mn 53.118; Mo 0.8302; Ni 0.55581; Pb 27.868; Sb n.a.; Se n.a.; Sn n.a.; V n.a.; Zn 17.807; Be n.a.; Sc n.a.; Sr n.a.; Ti n.a.; Tl n.a.; W n.a.; Si n.a.; Fe 15.479; Ca 130.89; Al 6.3322; K 65.412; Mg 197.56; Na 14.071;
Share of carbon in waste that is biogenic 100%.
Overall degradability of waste during 100 years: 1.5%.
[This dataset was already contained in the ecoinvent database version 2. It was not individually updated during the transfer to ecoinvent version 3. Life Cycle Impact Assessment results may still have changed, as they are affected by changes in the supply chain, i.e. in other datasets. This dataset was generated following the ecoinvent quality guidelines for version 2. It may have been subject to central changes described in the ecoinvent version 3 change report (http://www.ecoinvent.org/database/ecoinvent-version-3/reports-of-changes/), and the results of the central updates were reviewed extensively. The changes added e.g. consistent water flows and other information throughout the database. The documentation of this dataset can be found in the ecoinvent reports of version 2, which are still available via the ecoinvent website. The change report linked above covers all central changes that were made during the conversion process.]

## Included activities end
Waste-specific short-term emissions to air via landfill gas incineration and landfill leachate. Burdens from treatment of short-term leachate (0-100a) in wastewater treatment plant (including WWTP sludge disposal in municipal incinerator). Long-term emissions from landfill to groundwater (after base lining failure).

## Geography
Technology encountered in Switzerland in 2000. Landfill includes base seal, leachate collection system, treatment of leachate in municipal wastewater treatment plant.

## Technology
Swiss municipal sanitary landfill for biogenic or untreated municipal waste ('reactive organic landfill'). Landfill gas and leachate collection system. Recultivation and monitoring for 150 years after closure.

## Reference product
- waste wood, untreated: -1 kg; name RP; By-product classification Waste; CPC 3928: Sawdust and wood waste and scrap
  EcoSpold01Location=CH
  production volume 7.6087e8 kg
    Estimated value.
    The global production volume is scaled up from the Europe without Switzerland production volume using GDP.
    The GDP of Europe without Switzerland in 2005 was 32.2% of the global GDP.
    There was 5.291E+10 kg of wood waste treated in the EU28 in 2012 (Eurostat). Out of that 4.9E+8 kg of wood waste was deposited onto or into land.
    50% of the wood waste landfilled is estimated to be landfilled on sanitary landfill.
  property carbon content, non-fossil 0.48632
    Tab A.4, ecoinvent v2.2 report 13_I. C content has been referred to 1 kg DM,
  property heating value, net 13.99 MJ
    Value taken from the general comment of the treatment dataset.
  property price 0 EUR2005
    Waste products are assigned a price of zero as they are assumed to require further treatment.
  properties: carbon allocation 0.389056 kg, carbon content 0.48632, carbon content, fossil 0, dry mass 0.8 kg, water content 0.25, water in wet mass 0.2 kg, wet mass 1 kg

## Inputs from technosphere
- aluminium sulfate, powder: 1.17e-7 kg; lognormal variance with pedigree 1.8, pedigree (5,5,5,5,5)
  burden from wastewater treatment of the short-term leachate (0-100a). Uncertainty calculated from unertainty of the waste composition of this waste, uncertainty in waste decomposition and short-term leaching in sanitary landfill
  EcoSpold01Location=RER
  Uncertainty: . Uncertainty calculated from unertainty of the waste composition of this waste, uncertainty in waste decomposition and short-term leaching in sanitary landfill
  properties: dry mass 1 kg, wet mass 1 kg
- ammonia, anhydrous, liquid: 2.82968e-9, 2.96581e-10, 2.8882e-9, 1.08999e-8, 1.45769e-9, 1.32583e-9, 3.13652e-8, 9.36975e-10 kg (8 suppliers, which the file names only by identifier); sum of these 5.2e-8 kg; lognormal variance with pedigree 0.732, pedigree (1,1,5,5,1)
  EcoSpold01Location=CH
  burden from incineration of sludge from wastewater treatment of the short-term leachate (0-100a). uncertainty is calculated from uncertainties in waste composition and transfer coefficients in incinerator and uncertainty of waste decomposition and short-term leaching in sanitary landfill
  properties: dry mass 1 kg, wet mass 1 kg
- cement, unspecified: 1.42728e-7, 5.35505e-10, 3.50272e-10, 1.41728e-8, 3.73189e-9, 4.44868e-10, 1.76238e-10, 2.27422e-9, 8.58654e-9 kg (9 suppliers, which the file names only by identifier); sum of these 1.73e-7 kg; lognormal variance with pedigree 0.582, pedigree (1,1,5,5,1)
  (same comment as for ammonia, anhydrous, liquid)
  properties: dry mass 1 kg, wet mass 1 kg
- chemical, inorganic: 1.45e-10 kg; lognormal variance with pedigree 1.272, pedigree (1,1,5,5,1)
  EcoSpold01Location=GLO
  burden from incineration of sludge from wastewater treatment of the short-term leachate (0-100a). uncertainty is calculated from uncertainties in waste composition and transfer coefficients in incinerator and uncertainty of waste decomposition and short-term leaching in sanitary landfill
  properties: carbon content, fossil 0.003, dry mass 1 kg, wet mass 1 kg
  note on carbon content, fossil: This dataset is an unweighted average of 20 inorganic substances (listed in Tab 88.1, ecoinvent v2.2 report 8, part II), being part of the top100 chemicals included in this database. The C-content has also been calculated as an unweighted average of the C content of the substances composing this dataset.
- chemical, organic: 1.51e-9 kg; lognormal variance with pedigree 1.802, pedigree (1,1,5,5,1)
  burden from incineration of sludge from wastewater treatment of the short-term leachate (0-100a). uncertainty is calculated from uncertainties in waste composition and transfer coefficients in incinerator and uncertainty of waste decomposition and short-term leaching in sanitary landfill
  EcoSpold01Location=GLO
  properties: carbon content, fossil 0.628, dry mass 1 kg, heating value, net 19.03 MJ, wet mass 1 kg
  note on carbon content, fossil: This dataset is an unweighted average of 20 organic substances (listed in Tab 88.1, ecoinvent v2.2 report 8, part II), being part of the top100 chemicals included in this database. The C-content has also been calculated as an unweighted average of the C content of the substances composing this dataset.
- chromium oxide, flakes: 3.04e-11 kg; lognormal variance with pedigree 1.11, pedigree (5,5,5,5,5)
  burden from incineration of sludge from wastewater treatment of the short-term leachate (0-100a). Proxy for vanadium pentoxide V2O5 in SCR catalyst, uncertainty calculated from uncertainty in average DeNOx input, uncertainty in the share of thermal NOx, uncertainty of nitrogen content in average municipal waste and the unertainty in nitrogen content in *this* waste and uncertainty of waste decomposition and short-term leaching in sanitary landfill
  EcoSpold01Location=RER
  Uncertainty: . Proxy for vanadium pentoxide V2O5 in SCR catalyst, uncertainty calculated from uncertainty in average DeNOx input, uncertainty in the share of thermal NOx, uncertainty of nitrogen content in average municipal waste and the unertainty in nitrogen content in *this* waste and uncertainty of waste decomposition and short-term leaching in sanitary landfill
  properties: dry mass 1 kg, wet mass 1 kg
- electricity, high voltage: 2.60417e-8, 1.89605e-6, 8.02747e-6, 4.43316e-7, 1.33028e-7, 8.85097e-7, 5.9642e-7, 2.79257e-6 kWh (8 suppliers, which the file names only by identifier); sum of these 1.48e-5 kWh; lognormal variance with pedigree 1.162, pedigree (1,1,5,5,1)
  burden from incineration of sludge from wastewater treatment of the short-term leachate (0-100a). uncertainty is calculated from uncertainties in waste composition and transfer coefficients in incinerator and uncertainty of waste decomposition and short-term leaching in sanitary landfill
  EcoSpold01Location=CH
- electricity, low voltage: 9.85035e-6, 1.95211e-5, 0.000187521, 3.34509e-6, 6.70194e-5, 6.08319e-7, 4.64551e-5, 1.36799e-5 kWh (8 suppliers, which the file names only by identifier); sum of these 0.000348 kWh; lognormal variance with pedigree 0.5, pedigree (5,5,5,5,5)
  EcoSpold01Location=CH
  burden from wastewater treatment of the short-term leachate (0-100a). Uncertainty calculated from unertainty of the waste composition of this waste, uncertainty in waste decomposition and short-term leaching in sanitary landfill
  Uncertainty: . Uncertainty calculated from unertainty of the waste composition of this waste, uncertainty in waste decomposition and short-term leaching in sanitary landfill
- heat, central or small-scale, other than natural gas: 3.33815e-5, 4.58497e-7 MJ (2 suppliers, which the file names only by identifier); sum of these 3.384e-5 MJ; lognormal variance with pedigree 0.2106, pedigree (5,5,5,5,5)
  (same comment as for electricity, low voltage)
  properties: heating value, net 1 MJ
- heat, district or industrial, natural gas: 1.36501e-5, 3.69616e-5, 6.07373e-7 MJ (3 suppliers, which the file names only by identifier); sum of these 5.1219e-5 MJ; lognormal variance with pedigree 0.732, pedigree (1,1,5,5,1)
  EcoSpold01Location=RER
  burden from incineration of sludge from wastewater treatment of the short-term leachate (0-100a). uncertainty is calculated from uncertainties in waste composition and transfer coefficients in incinerator and uncertainty of waste decomposition and short-term leaching in sanitary landfill
  properties: heating value, net 1 MJ
- heat, district or industrial, other than natural gas: 8.39255e-5, 2.13565e-6, 3.88811e-8 MJ (3 suppliers, which the file names only by identifier); sum of these 8.61e-5 MJ; lognormal variance with pedigree 0.742, pedigree (1,1,5,5,1)
  (same comment as for electricity, high voltage)
  properties: heating value, net 1 MJ
- hydrochloric acid, without water, in 30% solution state: 8.69e-11 kg; lognormal variance with pedigree 1.272, pedigree (1,1,5,5,1)
  burden from incineration of sludge from wastewater treatment of the short-term leachate (0-100a). uncertainty is calculated from uncertainties in waste composition and transfer coefficients in incinerator and uncertainty of waste decomposition and short-term leaching in sanitary landfill
  EcoSpold01Location=RER
  properties: dry mass 1 kg, heating value, net 3.32 MJ, wet mass 1 kg
- iron (III) chloride, without water, in 40% solution state: 5.96e-7 kg; lognormal variance with pedigree 1.672, pedigree (1,1,5,5,1)
  (same comment as for electricity, high voltage)
  properties: dry mass 1 kg, wet mass 1 kg
- iron sulfate: 4.33e-7 kg; lognormal variance with pedigree 1.8, pedigree (5,5,5,5,5)
  (same comment as for aluminium sulfate, powder)
  properties: dry mass 1 kg, wet mass 1 kg
- municipal waste incineration facility: 2.57e-14 unit; lognormal variance with pedigree 0.742, pedigree (1,1,5,5,1)
  Burden from incineration of sludge from wastewater treatment of the short-term leachate (0-100a).
  EcoSpold01Location=CH
- process-specific burdens, municipal waste incineration: 7.38639e-5, 2.91361e-5 kg (2 suppliers, which the file names only by identifier); sum of these 0.000103 kg; lognormal variance with pedigree 0.742, pedigree (1,1,5,5,1)
  (same comment as for municipal waste incineration facility)
- process-specific burdens, residual material landfill: 1.22485e-7, 3.10515e-7 kg (2 suppliers, which the file names only by identifier); sum of these 4.33e-7 kg; lognormal variance with pedigree 0.582, pedigree (1,1,5,5,1)
  (same comment as for ammonia, anhydrous, liquid)
- process-specific burdens, sanitary landfill: 1 kg; lognormal variance with pedigree 0.042, pedigree (1,1,5,5,1)
  EcoSpold01Location=CH
  demands per kilogram waste. uncertainty is heeded in the module
- process-specific burdens, slag landfill: 1.31951e-6, 5.20489e-7 kg (2 suppliers, which the file names only by identifier); sum of these 1.84e-6 kg; lognormal variance with pedigree 0.682, pedigree (1,1,5,5,1)
  (same comment as for electricity, high voltage)
- quicklime, milled, packed: 4.95e-10 kg; lognormal variance with pedigree 0.602, pedigree (1,1,5,5,1)
  (same comment as for electricity, high voltage)
  properties: dry mass 0.99 kg, water content 0.010101, wet mass 1 kg
- residual material landfill: 9.01e-16 unit; lognormal variance with pedigree 0.582, pedigree (1,1,5,5,1)
  (same comment as for ammonia, anhydrous, liquid)
- sanitary landfill facility: 5.56e-10 unit; lognormal variance with pedigree 0.042, pedigree (1,1,5,5,1)
  EcoSpold01Location=CH
  demands per kilogram waste. uncertainty is heeded in the module
- sewer grid, 5E9l/year, 110 km: 5.45e-10 km; lognormal variance with pedigree 0.2106, pedigree (5,5,5,5,5)
  burden from wastewater treatment of the short-term leachate (0-100a). Uncertainty calculated from unertainty of the waste composition of this waste, uncertainty in waste decomposition and short-term leaching in sanitary landfill
  EcoSpold01Location=CH
  Uncertainty: . Uncertainty calculated from unertainty of the waste composition of this waste, uncertainty in waste decomposition and short-term leaching in sanitary landfill
- slag landfill: 3.27e-15 unit; lognormal variance with pedigree 0.682, pedigree (1,1,5,5,1)
  (same comment as for electricity, high voltage)
- sodium hydroxide, without water, in 50% solution state: 2.73e-9 kg; lognormal variance with pedigree 0.592, pedigree (1,1,5,5,1)
  (same comment as for heat, district or industrial, natural gas)
  properties: dry mass 1 kg, heating value, net 3.03 MJ, wet mass 1 kg
- titanium dioxide: 1.49e-9 kg; lognormal variance with pedigree 0.992, pedigree (1,1,5,5,1)
  (same comment as for hydrochloric acid, without water, in 30% solution state)
  properties: dry mass 1 kg, wet mass 1 kg
- waste cement, hydrated: -1.22485e-7, -3.10515e-7 kg (2 suppliers, which the file names only by identifier); sum of these -4.33e-7 kg
  (same comment as for ammonia, anhydrous, liquid)
  production volume
    Calculated from the production volume of waste wood, untreated, 20% water in proportion to the respective output amounts.
  properties: dry mass 1 kg, wet mass 1 kg
- waste graphical paper: -4.09465e-6, -9.36524e-7, -2.59179e-7, -2.26629e-8, -9.13189e-8, -3.15294e-5, -1.69726e-6, -1.69041e-7 kg (8 suppliers, which the file names only by identifier); sum of these -3.88e-5 kg
  EcoSpold01Location=CH
  burden from wastewater treatment of the short-term leachate (0-100a). Uncertainty calculated from unertainty of the waste composition of this waste, uncertainty in waste decomposition and short-term leaching in sanitary landfill
  production volume
    (same comment as for waste cement, hydrated)
  properties: carbon content, non-fossil 0.454955, dry mass 0.888 kg, heating value, net 14.12 MJ, water content 0.126126, wet mass 1 kg
  note on heating value, net: Value taken from the general comment of the treatment dataset.
- waste plastic, mixture: -4.31618e-6, -2.18105e-8, -4.81214e-8, -3.02157e-5, -2.88391e-7, -3.67759e-6, -1.13112e-7, -1.19116e-7 kg (8 suppliers, which the file names only by identifier); sum of these -3.88e-5 kg
  burden from wastewater treatment of the short-term leachate (0-100a). Uncertainty calculated from unertainty of the waste composition of this waste, uncertainty in waste decomposition and short-term leaching in sanitary landfill
  EcoSpold01Location=CH
  production volume
    (same comment as for waste cement, hydrated)
  properties: carbon content, fossil 0.747344, dry mass 0.847 kg, heating value, net 30.79 MJ, water content 0.180638, wet mass 1 kg
  note on carbon content, fossil: C content in 1 kg DM was calculated using data in Tab A.2, ecoinvent v2.2 report 13_I
- wastewater treatment facility, capacity 5E9l/year: 1.42e-11 unit; lognormal variance with pedigree 0.2106, pedigree (5,5,5,5,5)
  (same comment as for sewer grid, 5E9l/year, 110 km)

## Emissions to nature
- Aluminium III [air, non-urban air or from high stacks]: 1.19e-12 kg; lognormal variance with pedigree 3.142, pedigree (1,1,5,5,1)
  burden from direct release or incineration of landfill biogas. Uncertainty calculated from unertainty of the waste composition of this waste, uncertainty in waste decomposition and short-term leaching in sanitary landfill
- Aluminium III [air, urban air close to ground]: 3.59e-11 kg; lognormal variance with pedigree 1.402, pedigree (1,1,5,5,1)
  Emissions from short-term leachate treatment and incineration of resulting sludge. Uncertainty calculated depending on waste input and uncertainty of transfer coefficents in landfill, wastewater treatment and incineration model.
- Ammonia [air, urban air close to ground]: 3.3e-8 kg; lognormal variance with pedigree 0.652, pedigree (1,1,5,5,1)
  (same comment as for Aluminium III)
- Arsenic ion [air, non-urban air or from high stacks]: 1.59e-11 kg; lognormal variance with pedigree 2.802, pedigree (1,1,5,5,1)
  (same comment as for Aluminium III)
- Arsenic ion [air, urban air close to ground]: 3.2e-13 kg; lognormal variance with pedigree 2.292, pedigree (1,1,5,5,1)
  (same comment as for Aluminium III)
- Boron [air, urban air close to ground]: 1.26e-8 kg; lognormal variance with pedigree 1.652, pedigree (1,1,5,5,1)
  (same comment as for Aluminium III)
- Cadmium II [air, non-urban air or from high stacks]: 3.53e-12 kg; lognormal variance with pedigree 3.002, pedigree (1,1,5,5,1)
  (same comment as for Aluminium III)
- Cadmium II [air, urban air close to ground]: 1.45e-14 kg; lognormal variance with pedigree 2.402, pedigree (1,1,5,5,1)
  (same comment as for Aluminium III)
- Calcium [air, non-urban air or from high stacks]: 6.39e-11 kg; lognormal variance with pedigree 2.622, pedigree (1,1,5,5,1)
  (same comment as for Aluminium III)
- Calcium [air, urban air close to ground]: 4.18e-11 kg; lognormal variance with pedigree 1.562, pedigree (1,1,5,5,1)
  (same comment as for Aluminium III)
- Carbon dioxide, non-fossil [air, non-urban air or from high stacks]: 0.0151 kg; lognormal variance with pedigree 0.392, pedigree (1,1,5,5,1)
  (same comment as for Aluminium III)
- Carbon dioxide, non-fossil [air, urban air close to ground]: 0.000503 kg; lognormal variance with pedigree 0.832, pedigree (1,1,5,5,1)
  (same comment as for Aluminium III)
- Carbon monoxide, non-fossil [air, non-urban air or from high stacks]: 8.55e-7 kg; lognormal variance with pedigree 1.032, pedigree (1,1,5,5,1)
  (same comment as for Aluminium III)
- Carbon monoxide, non-fossil [air, urban air close to ground]: 3.23e-7 kg; lognormal variance with pedigree 0.892, pedigree (1,1,5,5,1)
  (same comment as for Aluminium III)
- Chromium III [air, non-urban air or from high stacks]: 2.81e-14 kg; lognormal variance with pedigree 3.622, pedigree (1,1,5,5,1)
  (same comment as for Aluminium III)
- Chromium III [air, urban air close to ground]: 4.1e-18 kg; lognormal variance with pedigree 2.662, pedigree (1,1,5,5,1)
  (same comment as for Aluminium III)
- Cobalt II [air, non-urban air or from high stacks]: 1.05e-13 kg; lognormal variance with pedigree 3.502, pedigree (1,1,5,5,1)
  (same comment as for Aluminium III)
- Cobalt II [air, urban air close to ground]: 6.54e-18 kg; lognormal variance with pedigree 2.542, pedigree (1,1,5,5,1)
  (same comment as for Aluminium III)
- Copper ion [air, non-urban air or from high stacks]: 8.71e-14 kg; lognormal variance with pedigree 3.472, pedigree (1,1,5,5,1)
  (same comment as for Aluminium III)
- Copper ion [air, urban air close to ground]: 1.67e-15 kg; lognormal variance with pedigree 2.492, pedigree (1,1,5,5,1)
  (same comment as for Aluminium III)
- Cyanide [air, urban air close to ground]: 9.28e-10 kg; lognormal variance with pedigree 0.752, pedigree (1,1,5,5,1)
  (same comment as for Aluminium III)
- Dinitrogen monoxide [air, urban air close to ground]: 9.1e-8 kg; lognormal variance with pedigree 0.582, pedigree (1,1,5,5,1)
  (same comment as for Aluminium III)
- Hydrochloric acid [air, non-urban air or from high stacks]: 1.8e-7 kg; lognormal variance with pedigree 1.582, pedigree (1,1,5,5,1)
  (same comment as for Aluminium III)
- Hydrogen fluoride [air, non-urban air or from high stacks]: 1.26e-7 kg; lognormal variance with pedigree 1.642, pedigree (1,1,5,5,1)
  (same comment as for Aluminium III)
- Iron ion [air, non-urban air or from high stacks]: 7.97e-13 kg; lognormal variance with pedigree 3.182, pedigree (1,1,5,5,1)
  (same comment as for Aluminium III)
- Iron ion [air, urban air close to ground]: 1.22e-11 kg; lognormal variance with pedigree 1.712, pedigree (1,1,5,5,1)
  (same comment as for Aluminium III)
- Lead II [air, non-urban air or from high stacks]: 8.21e-13 kg; lognormal variance with pedigree 3.182, pedigree (1,1,5,5,1)
  (same comment as for Aluminium III)
- Lead II [air, urban air close to ground]: 8.15e-14 kg; lognormal variance with pedigree 2.212, pedigree (1,1,5,5,1)
  (same comment as for Aluminium III)
- Magnesium [air, non-urban air or from high stacks]: 4.57e-10 kg; lognormal variance with pedigree 2.362, pedigree (1,1,5,5,1)
  (same comment as for Aluminium III)
- Magnesium [air, urban air close to ground]: 2.47e-10 kg; lognormal variance with pedigree 1.322, pedigree (1,1,5,5,1)
  (same comment as for Aluminium III)
- Manganese II [air, non-urban air or from high stacks]: 2.28e-10 kg; lognormal variance with pedigree 2.462, pedigree (1,1,5,5,1)
  (same comment as for Aluminium III)
- Manganese II [air, urban air close to ground]: 2.45e-15 kg; lognormal variance with pedigree 1.532, pedigree (1,1,5,5,1)
  (same comment as for Aluminium III)
- Mercury II [air, non-urban air or from high stacks]: 1.31e-10 kg; lognormal variance with pedigree 2.522, pedigree (1,1,5,5,1)
  (same comment as for Aluminium III)
- Mercury II [air, urban air close to ground]: 5.56e-16 kg; lognormal variance with pedigree 2.462, pedigree (1,1,5,5,1)
  (same comment as for Aluminium III)
- Methane, non-fossil [air, non-urban air or from high stacks]: 0.00231 kg; lognormal variance with pedigree 0.432, pedigree (1,1,5,5,1)
  (same comment as for Aluminium III)
- Methane, non-fossil [air, urban air close to ground]: 9.86e-7 kg; lognormal variance with pedigree 0.882, pedigree (1,1,5,5,1)
  (same comment as for Aluminium III)
- Molybdenum VI [air, non-urban air or from high stacks]: 3.28e-13 kg; lognormal variance with pedigree 3.312, pedigree (1,1,5,5,1)
  (same comment as for Aluminium III)
- Molybdenum VI [air, urban air close to ground]: 1.29e-12 kg; lognormal variance with pedigree 2.262, pedigree (1,1,5,5,1)
  (same comment as for Aluminium III)
- NMVOC, non-methane volatile organic compounds [air, non-urban air or from high stacks]: 1.62e-8 kg; lognormal variance with pedigree 0.432, pedigree (1,1,5,5,1)
  (same comment as for Aluminium III)
- NMVOC, non-methane volatile organic compounds [air, urban air close to ground]: 4.48e-9 kg; lognormal variance with pedigree 0.992, pedigree (1,1,5,5,1)
  (same comment as for Aluminium III)
- Nickel II [air, non-urban air or from high stacks]: 1.21e-13 kg; lognormal variance with pedigree 3.442, pedigree (1,1,5,5,1)
  (same comment as for Aluminium III)
- Nickel II [air, urban air close to ground]: 8.23e-18 kg; lognormal variance with pedigree 2.472, pedigree (1,1,5,5,1)
  (same comment as for Aluminium III)
- Nitrogen oxides [air, non-urban air or from high stacks]: 9.54e-9 kg; lognormal variance with pedigree 1.282, pedigree (1,1,5,5,1)
  (same comment as for Aluminium III)
- Nitrogen oxides [air, urban air close to ground]: 3.23e-7 kg; lognormal variance with pedigree 0.632, pedigree (1,1,5,5,1)
  (same comment as for Aluminium III)
- Particulate Matter, < 2.5 um [air, non-urban air or from high stacks]: 2.87e-7 kg; lognormal variance with pedigree 0.692, pedigree (1,1,5,5,1)
  (same comment as for Aluminium III)
- Phosphorus [air, urban air close to ground]: 5.8e-11 kg; lognormal variance with pedigree 1.702, pedigree (1,1,5,5,1)
  (same comment as for Aluminium III)
- Potassium I [air, non-urban air or from high stacks]: 1.79e-10 kg; lognormal variance with pedigree 2.492, pedigree (1,1,5,5,1)
  (same comment as for Aluminium III)
- Sodium [air, non-urban air or from high stacks]: 2.18e-10 kg; lognormal variance with pedigree 2.462, pedigree (1,1,5,5,1)
  (same comment as for Aluminium III)
- Sulfur dioxide [air, non-urban air or from high stacks]: 2.46e-7 kg; lognormal variance with pedigree 1.622, pedigree (1,1,5,5,1)
  (same comment as for Aluminium III)
- Zinc II [air, non-urban air or from high stacks]: 2.81e-12 kg; lognormal variance with pedigree 3.032, pedigree (1,1,5,5,1)
  (same comment as for Aluminium III)
- Zinc II [air, urban air close to ground]: 1.43e-13 kg; lognormal variance with pedigree 2.002, pedigree (1,1,5,5,1)
  (same comment as for Aluminium III)
- Aluminium III [water, ground-, long-term]: 6.34e-6 kg; lognormal variance with pedigree 1.362, pedigree (1,1,5,5,1)
  Emissions from long-term leachate (>100a) directly from MSW landfill and indirectly via incineration of treatement sludge from leachate treatement. Uncertainty calculated depending on waste input and uncertainty of long-term transfer coefficents in landfill.
- Aluminium III [water, surface water]: 2.87e-10 kg; lognormal variance with pedigree 2.062, pedigree (1,1,5,5,1)
  (same comment as for Aluminium III)
- Ammonium [water, ground-, long-term]: 0.000387 kg; lognormal variance with pedigree 0.702, pedigree (1,1,5,5,1)
  (same comment as for Aluminium III)
- Ammonium [water, surface water]: 1.79e-5 kg; lognormal variance with pedigree 0.672, pedigree (1,1,5,5,1)
  (same comment as for Aluminium III)
- Arsenic ion [water, ground-, long-term]: 4.21e-7 kg; lognormal variance with pedigree 1.722, pedigree (1,1,5,5,1)
  (same comment as for Aluminium III)
- Arsenic ion [water, surface water]: 1e-9 kg; lognormal variance with pedigree 2.252, pedigree (1,1,5,5,1)
  (same comment as for Aluminium III)
- BOD5, Biological Oxygen Demand [water, ground-, long-term]: 0.0262 kg; lognormal variance with pedigree 0.532, pedigree (1,1,5,5,1)
  (same comment as for Aluminium III)
- BOD5, Biological Oxygen Demand [water, surface water]: 3.48e-5 kg; lognormal variance with pedigree 0.832, pedigree (1,1,5,5,1)
  (same comment as for Aluminium III)
- Boron [water, ground-, long-term]: 1.97e-6 kg; lognormal variance with pedigree 1.462, pedigree (1,1,5,5,1)
  (same comment as for Aluminium III)
- Boron [water, surface water]: 1.25e-7 kg; lognormal variance with pedigree 1.632, pedigree (1,1,5,5,1)
  (same comment as for Aluminium III)
- COD, Chemical Oxygen Demand [water, ground-, long-term]: 0.111 kg; lognormal variance with pedigree 0.532, pedigree (1,1,5,5,1)
  (same comment as for Aluminium III)
- COD, Chemical Oxygen Demand [water, surface water]: 0.000111 kg; lognormal variance with pedigree 0.832, pedigree (1,1,5,5,1)
  (same comment as for Aluminium III)
- Cadmium II [water, ground-, long-term]: 2e-7 kg; lognormal variance with pedigree 1.822, pedigree (1,1,5,5,1)
  (same comment as for Aluminium III)
- Cadmium II [water, surface water]: 2.69e-10 kg; lognormal variance with pedigree 2.342, pedigree (1,1,5,5,1)
  (same comment as for Aluminium III)
- Calcium II [water, ground-, long-term]: 0.000131 kg; lognormal variance with pedigree 0.972, pedigree (1,1,5,5,1)
  (same comment as for Aluminium III)
- Calcium II [water, surface water]: 2.31e-7 kg; lognormal variance with pedigree 1.532, pedigree (1,1,5,5,1)
  (same comment as for Aluminium III)
- Chloride [water, ground-, long-term]: 0.000318 kg; lognormal variance with pedigree 0.842, pedigree (1,1,5,5,1)
  (same comment as for Aluminium III)
- Chloride [water, surface water]: 1.29e-5 kg; lognormal variance with pedigree 1.012, pedigree (1,1,5,5,1)
  Emissions from short-term leachate treatment. Uncertainty calculated depending on waste input and uncertainty of transfer coefficents in landfill and wastewater treatment.
- Chromium III [water, surface water]: 1.77e-13 kg; lognormal variance with pedigree 2.582, pedigree (1,1,5,5,1)
  (same comment as for Aluminium III)
- Chromium VI [water, ground-, long-term]: 2.99e-9 kg; lognormal variance with pedigree 8.952, pedigree (1,1,5,5,1)
  (same comment as for Aluminium III)
- Chromium VI [water, surface water]: 5.89e-11 kg; lognormal variance with pedigree 2.552, pedigree (1,1,5,5,1)
  (same comment as for Aluminium III)
- Cobalt II [water, ground-, long-term]: 8.65e-8 kg; lognormal variance with pedigree 1.952, pedigree (1,1,5,5,1)
  (same comment as for Aluminium III)
- Cobalt II [water, surface water]: 2.12e-10 kg; lognormal variance with pedigree 2.412, pedigree (1,1,5,5,1)
  (same comment as for Aluminium III)
- Copper ion [water, ground-, long-term]: 4.15e-6 kg; lognormal variance with pedigree 1.422, pedigree (1,1,5,5,1)
  (same comment as for Aluminium III)
- Copper ion [water, surface water]: 7.9e-11 kg; lognormal variance with pedigree 2.422, pedigree (1,1,5,5,1)
  (same comment as for Aluminium III)
- DOC, Dissolved Organic Carbon [water, ground-, long-term]: 0.101 kg; lognormal variance with pedigree 0.532, pedigree (1,1,5,5,1)
  (same comment as for Aluminium III)
- DOC, Dissolved Organic Carbon [water, surface water]: 2.69e-5 kg; lognormal variance with pedigree 0.832, pedigree (1,1,5,5,1)
  (same comment as for Aluminium III)
- Fluoride [water, ground-, long-term]: 2.1e-5 kg; lognormal variance with pedigree 1.212, pedigree (1,1,5,5,1)
  (same comment as for Aluminium III)
- Fluoride [water, surface water]: 2.33e-8 kg; lognormal variance with pedigree 1.852, pedigree (1,1,5,5,1)
  (same comment as for Chloride)
- Hydrogen sulfide [water, ground-, long-term]: 9.08e-6 kg; lognormal variance with pedigree 0.972, pedigree (1,1,5,5,1)
  (same comment as for Aluminium III)
- Iron ion [water, ground-, long-term]: 1.25e-6 kg; lognormal variance with pedigree 2.802, pedigree (1,1,5,5,1)
  (same comment as for Aluminium III)
- Iron ion [water, surface water]: 1.74e-9 kg; lognormal variance with pedigree 2.002, pedigree (1,1,5,5,1)
  (same comment as for Aluminium III)
- Lead II [water, ground-, long-term]: 2.79e-5 kg; lognormal variance with pedigree 1.172, pedigree (1,1,5,5,1)
  (same comment as for Aluminium III)
- Lead II [water, surface water]: 2.71e-10 kg; lognormal variance with pedigree 2.152, pedigree (1,1,5,5,1)
  (same comment as for Aluminium III)
- Magnesium [water, ground-, long-term]: 0.000196 kg; lognormal variance with pedigree 0.912, pedigree (1,1,5,5,1)
  (same comment as for Aluminium III)
- Magnesium [water, surface water]: 1.65e-6 kg; lognormal variance with pedigree 1.292, pedigree (1,1,5,5,1)
  (same comment as for Aluminium III)
- Manganese II [water, ground-, long-term]: 5.14e-5 kg; lognormal variance with pedigree 1.072, pedigree (1,1,5,5,1)
  (same comment as for Aluminium III)
- Manganese II [water, surface water]: 4.63e-7 kg; lognormal variance with pedigree 1.392, pedigree (1,1,5,5,1)
  (same comment as for Aluminium III)
- Mercury II [water, ground-, long-term]: 3.19e-7 kg; lognormal variance with pedigree 1.752, pedigree (1,1,5,5,1)
  (same comment as for Aluminium III)
- Mercury II [water, surface water]: 1.04e-10 kg; lognormal variance with pedigree 2.412, pedigree (1,1,5,5,1)
  (same comment as for Aluminium III)
- Molybdenum VI [water, ground-, long-term]: 3.28e-7 kg; lognormal variance with pedigree 1.852, pedigree (1,1,5,5,1)
  (same comment as for Aluminium III)
- Molybdenum VI [water, surface water]: 7.77e-10 kg; lognormal variance with pedigree 2.232, pedigree (1,1,5,5,1)
  (same comment as for Aluminium III)
- Nickel II [water, ground-, long-term]: 5.55e-7 kg; lognormal variance with pedigree 1.682, pedigree (1,1,5,5,1)
  (same comment as for Aluminium III)
- Nickel II [water, surface water]: 2.94e-10 kg; lognormal variance with pedigree 2.362, pedigree (1,1,5,5,1)
  (same comment as for Aluminium III)
- Nitrate [water, ground-, long-term]: 4.08e-5 kg; lognormal variance with pedigree 0.702, pedigree (1,1,5,5,1)
  (same comment as for Aluminium III)
- Nitrate [water, surface water]: 6.53e-5 kg; lognormal variance with pedigree 0.602, pedigree (1,1,5,5,1)
  (same comment as for Aluminium III)
- Nitrite [water, ground-, long-term]: 2.11e-5 kg; lognormal variance with pedigree 0.702, pedigree (1,1,5,5,1)
  (same comment as for Aluminium III)
- Nitrite [water, surface water]: 3.76e-7 kg; lognormal variance with pedigree 0.922, pedigree (1,1,5,5,1)
  (same comment as for Aluminium III)
- Nitrogen [water, surface water]: 4.86e-7 kg; lognormal variance with pedigree 0.622, pedigree (1,1,5,5,1)
  (same comment as for Aluminium III)
- Nitrogen, organic bound [water, ground-, long-term]: 0.000633 kg; lognormal variance with pedigree 0.702, pedigree (1,1,5,5,1)
  (same comment as for Aluminium III)
- Phosphate [water, ground-, long-term]: 2.26e-6 kg; lognormal variance with pedigree 7.232, pedigree (1,1,5,5,1)
  (same comment as for Aluminium III)
- Phosphate [water, surface water]: 9.86e-8 kg; lognormal variance with pedigree 1.662, pedigree (1,1,5,5,1)
  (same comment as for Aluminium III)
- Potassium I [water, ground-, long-term]: 6.47e-5 kg; lognormal variance with pedigree 1.062, pedigree (1,1,5,5,1)
  (same comment as for Aluminium III)
- Potassium I [water, surface water]: 7.17e-7 kg; lognormal variance with pedigree 1.412, pedigree (1,1,5,5,1)
  (same comment as for Chloride)
- Sodium I [water, ground-, long-term]: 1.32e-5 kg; lognormal variance with pedigree 1.262, pedigree (1,1,5,5,1)
  (same comment as for Aluminium III)
- Sodium I [water, surface water]: 8.73e-7 kg; lognormal variance with pedigree 1.422, pedigree (1,1,5,5,1)
  (same comment as for Chloride)
- Sulfate [water, ground-, long-term]: 0.000348 kg; lognormal variance with pedigree 0.972, pedigree (1,1,5,5,1)
  (same comment as for Aluminium III)
- Sulfate [water, surface water]: 2.51e-6 kg; lognormal variance with pedigree 1.192, pedigree (1,1,5,5,1)
  (same comment as for Chloride)
- TOC, Total Organic Carbon [water, ground-, long-term]: 0.101 kg; lognormal variance with pedigree 0.532, pedigree (1,1,5,5,1)
  (same comment as for Aluminium III)
- TOC, Total Organic Carbon [water, surface water]: 2.8e-5 kg; lognormal variance with pedigree 0.832, pedigree (1,1,5,5,1)
  (same comment as for Aluminium III)
- Zinc II [water, ground-, long-term]: 1.47e-5 kg; lognormal variance with pedigree 1.242, pedigree (1,1,5,5,1)
  (same comment as for Aluminium III)
- Zinc II [water, surface water]: 3.91e-9 kg; lognormal variance with pedigree 1.932, pedigree (1,1,5,5,1)
  (same comment as for Aluminium III)

## Sampling procedure
Landfill model based on observed leachate concentrations in literature. Extrapolated to 60'000 years heeding chemical characteristics. Initial waste composition from various literature sources.

## Extrapolations
This dataset has been extrapolated from the global datasets which is based on data from Switzerland. The uncertainty has been adjusted accordingly.

## Review by Niels Jungbluth 2003-07-21
Passed. Calculation for standard deviation 95 of, i.e., infrastructure,
land occupation, transport services or other services can differ from
standard Pedigree approach used in this project and figures obtained by
this procedure.

## Review by Tereza Levova 2015-06-11
The production volume was edited by the ecoinvent Centre for the eiv3.2.
