# treatment of lignite ash, municipal incineration with fly ash extraction

Dataset: EcoSpold 2, unit process
Geography: CH
Time period: 2006-01-01 to 2022-12-31
Technology level: current
Classification: ISIC rev.4 ecoinvent: 3821:Treatment and disposal of non-hazardous waste
Synonyms: municipal waste incineration
Scenario: Business-as-Usual
System model: Allocation at the point of substitution
Share of production covered: 1.8 %
Generated by: Gabor Doka
Published in: Doka G. 2015
Database: ecoinvent
isCopyrightProtected: true

## General comment
This dataset represents the activity of waste disposal of lignite ash in a municipal solid waste incinerator (MSWI) // Recommended use of this dataset: For small amounts of lignite ash from small scale furnaces, which go to disposal as part of communal waste mixture. Larger amounts will be landfilled or could be used in building material production. // // Waste composition (wet, in ppm): upper heating value 2.578 MJ/kg; H2O n.a.; O 83797; H n.a.; C 100000; S n.a.; N n.a.; P 392; B 2100; Cl n.a.; Br 38.8; F n.a.; I 16.4; Ag n.a.; As 46; Ba 980; Cd 5.49; Co 147; Cr 134.4; Cu 58.5; Hg 0.1; Mn 198; Mo 66.5; Ni 145.5; Pb 47; Sb 38; Se 14; Sn 15.84; V 339.5; Zn 266; Be 9.8; Sc 4.95; Sr 679; Ti 980; Tl 0.19; W n.a.; Si 470400; Fe 52920; Ca 196000; Al 46060; K 5880; Mg 29400; Na 8820; // Share of carbon in waste that is biogenic 0%. // Share of metals in waste not oxidised and bulk-recyclable (exclude very small or thin parts) Iron: 0%; Alu: 0%; Copper: 0%. // Recovery of metal scrap from bottom ash to recycling: 0g iron scrap, 0g aluminium scrap, 0g copper scrap.Ultimately one kg of this waste produces 2.027 kg of bottom ash (can include some washed ash) and 0 kg of residues, which are landfilled (technology mix). Net energy production: 0MJ/kg electric energy and 0MJ/kg thermal energy. //

## Included activities start
waste incineration from waste reception gate and delivery into waste bunker at incinerator plant site (without transports to the incinerator)

## Included activities end
Waste-specific short-term emissions to water from leachate. Long-term emissions from landfill to ground water.

## Geography
Specific to the technology mix encountered in Switzerland in 2012.

## Technology
average Swiss MSWI plants in 2010 (grate incinerators) with electrostatic precipitator for fly ash (ESP), wet flue gas scrubber and 25% SNCR , 42.77% SCR-high dust , 32.68% SCR-low dust -DeNOx facilities and 0% without Denox (weighted according to mass of burnt waste, representing Swiss average). Efficiency of iron scrap separation from slag : 58%. Efficiency of non-ferrous scrap separation from slag : 31%. The technology mix for this dataset includes a filter ash treatment (FLUWA) of a share of 46.22%. Gross electric efficiency technology mix 15.84% and Gross thermal efficiency technology mix 28.51%

## Time period
Waste composition as given in literature reference, theoretical data or other source. Transfer coefficients for modern MSWI.

## Reference product
- lignite ash: -1 kg; By-product classification Waste; CPC 39: Wastes or scraps
  Main reference product of this activity (supply of disposal service).
  production volume 9.0938e6 kg
    based on corresponding global production volume of MSW fraction in conventional MSWI (wo fly ash extraction) and scaled down to annual Swiss incinerated MSW mass of 3.02 mio. tonnes.
  property heating value, net 21.7 MJ
    Based on literature, page 52, Report 5: Dones, R., Bauer, C., Bolliger, R., Burger, B., faist Emmenegger, M., Frischknecht, R., Heck, T., Jungbluth, N., Röder, A., Tuchschmid, M. (2007) Life Cycle Inventories of Energy Systems: Resulst for current Systems in Switzerland and other UCTE Countries. ecoinvent report No. 5. Paul Scherrer Institut Villigen, Swiss Centre for Life Cycle Inventories, Dübendorf, CH
  property price 0 EUR2005
    Waste products are assigned a price of zero as they are assumed to require further treatment.
  properties: aluminium content 0.04606, antimony content 3.8e-5, arsenic content 4.6e-5, barium content 0.00098, beryllium content 9.8e-6, boron content 0.0021, bromine content 3.88e-5, cadmium content 5.49e-6, calcium content 0.196, carbon allocation 0.1 kg, carbon content 0.1, carbon content, fossil 0.1, chromium content 0.0001344, cobalt content 0.000147, copper content 5.85e-5, dry mass 1 kg, iodine content 1.64e-5, iron content 0.05292, lead content 4.7e-5, magnesium content 0.0294, manganese content 0.000198, mercury content 1e-7, molybdenum content 6.65e-5, nickel content 0.0001455, oxygen content 0.083797, phosphorus content 0.000392, potassium content 0.00588, scandium content 4.95e-6, selenium content 1.4e-5, silicon content 0.4704, sodium content 0.00882, strontium content 0.000679, thallium content 1.9e-7, tin content 1.584e-5, titanium content 0.00098, vanadium content 0.0003395, wet mass 1 kg, zinc content 0.000266

## Inputs from technosphere
- ammonia, anhydrous, liquid: 0.00024067 kg; lognormal variance with pedigree 0.12926, pedigree (1,1,4,1,1)
  Input to DeNOx stage (100% NH3).
  Uncertainty: uncertainty calculated from uncertainty in average DeNOx input, uncertainty in the share of thermal NOx, uncertainty of nitrogen content in average municipal waste and the uncertainty in nitrogen content in *this* waste.
  properties: dry mass 1 kg, wet mass 1 kg
- chromium oxide, flakes: 3.0772e-7 kg; lognormal variance with pedigree 0.45542, pedigree (1,1,4,1,1)
  Input to DeNOx stage. Active component in SCR catalyst (vanadium pentoxide, V2O5), here approximated with the available chromium trioxide.
  Uncertainty: uncertainty calculated from uncertainty in average DeNOx input, uncertainty in the share of thermal NOx, uncertainty of nitrogen content in average municipal waste and the uncertainty in nitrogen content in *this* waste.
  properties: dry mass 1 kg, wet mass 1 kg
- electricity, for reuse in municipal waste incineration only: 0.068239 kWh; name E_el_prod_MSWI; lognormal variance with pedigree 0.00859512, pedigree (1,1,4,1,1)
  Net electricity required to incinerate this waste (subsidiesed from high-calorific waste fractions).
  Uncertainty: uncertainty is calculated from uncertainties in waste composition and uncertainties in energy efficiency and the uncertainty in internal energy demand
- heat, district or industrial, natural gas: 0.045005 MJ; lognormal variance with pedigree 0.12926, pedigree (1,1,4,1,1)
  Input to DeNOx stage, to heat up flue gas in low-dust SCR.
  Uncertainty: uncertainty calculated from uncertainty in average DeNOx input, uncertainty in the share of thermal NOx, uncertainty of nitrogen content in average municipal waste and the uncertainty in nitrogen content in *this* waste.
  properties: heating value, net 1 MJ
- heat, for reuse in municipal waste incineration only: 0.33415 MJ; name E_th_prod_MSWI; lognormal variance with pedigree 0.00859512, pedigree (1,1,4,1,1)
  Net heat required to incinerate this waste (subsidiesed from high-calorific waste fractions).
  Uncertainty: uncertainty is calculated from uncertainties in waste composition and uncertainties in energy efficiency and the uncertainty in internal energy demand
- municipal waste incineration facility: 2.5e-10 unit
  Demands per kilogram waste.
- process-specific burdens, slag landfill: 2.027 kg; lognormal variance with pedigree 0.042622, pedigree (1,1,4,1,1)
  Mass-specific expenditures required for landfilling of bottom ash.;activityLink introduced to establish a direct link to the corresponding regional supply of this product
  Uncertainty: uncertainty is calculated from uncertainties in waste composition and transfer coefficients in incinerator
- slag landfill: 3.6035e-9 unit; lognormal variance with pedigree 0.042622, pedigree (1,1,4,1,1)
  Landfill infrastructure required for landfilling of bottom ash.
  Uncertainty: uncertainty is calculated from uncertainties in waste composition and transfer coefficients in incinerator
- titanium dioxide: 1.5079e-5 kg; lognormal variance with pedigree 0.45542, pedigree (1,1,4,1,1)
  Input to DeNOx stage (TiO2 catalyst carrier)
  Uncertainty: uncertainty calculated from uncertainty in average DeNOx input, uncertainty in the share of thermal NOx, uncertainty of nitrogen content in average municipal waste and the uncertainty in nitrogen content in *this* waste.
  properties: dry mass 1 kg, wet mass 1 kg
- transport, freight, lorry, unspecified: 0.081079 metric ton*km; lognormal variance with pedigree 0.042622, pedigree (1,1,4,1,1)
  Transport services to transport incineration residues to landfills and filter ash to external treatments (FLUWA).
  Uncertainty: uncertainty calculated from uncertainty of the waste composition of this waste, uncertainty of transfer coefficients and the uncertainty in generic transportation distances

## Inputs from nature
- Oxygen [natural resource, in air]: 0.74064 kg; lognormal variance with pedigree 0.14537, pedigree (1,1,4,1,1)
  Oxygen from ambient air needed to combust and oxidise this waste. Net demand, i.e. without O2 leaving the plant in flue gas uncombusted.
  Uncertainty: uncertainty is calculated from uncertainties in waste composition and transfer coefficients to flue gas and soild residues in incinerator

## Emissions to nature
- Ammonia [air, urban air close to ground]: 2.8297e-7 kg; lognormal variance with pedigree 0.17159, pedigree (1,1,4,1,1)
  Nitrogen species emitted to air after DeNOx stage.
  Uncertainty: uncertainty calculated from uncertainty in average N-emissions and uncertainty in the share of thermal NOx and the uncertainty in nitrogen content in *this* waste.
- Benzene [air, urban air close to ground]: 4.1084e-8 kg; lognormal variance with pedigree 0.0491, pedigree (1,1,4,1,1)
  Incomplete combustion product emitted to air.
  Uncertainty: uncertainty calculated from uncertainty in average operation emissions, and the uncertainty of the flue gas volume from this waste.
- Benzene, hexachloro- [air, urban air close to ground]: 8.5906e-11 kg; lognormal variance with pedigree 0.0491, pedigree (1,1,4,1,1)
  (same comment as for Benzene)
- Benzene, pentachloro- [air, urban air close to ground]: 2.1706e-10 kg; lognormal variance with pedigree 0.0491, pedigree (1,1,4,1,1)
  (same comment as for Benzene)
- Benzo(a)pyrene [air, urban air close to ground]: 9.1426e-13 kg; lognormal variance with pedigree 0.30974, pedigree (1,1,4,1,1)
  (same comment as for Benzene)
- Carbon monoxide, fossil [air, urban air close to ground]: 6.9839e-5 kg; lognormal variance with pedigree 0.65557, pedigree (1,1,4,1,1)
  (same comment as for Benzene)
- Dioxins, measured as 2,3,7,8-tetrachlorodibenzo-p-dioxin [air, urban air close to ground]: 8.2163e-14 kg; lognormal variance with pedigree 0.30974, pedigree (1,1,4,1,1)
  (same comment as for Benzene)
- Heat, waste [air, urban air close to ground]: 2.2979 MJ; lognormal variance with pedigree 0.16154, pedigree (1,1,4,1,1)
  Waste heat generated from heating value of this waste plus any electricity required to process it.
  Uncertainty: uncertainty is calculated from uncertainties in waste composition and uncertainties in energy efficiency and the uncertainty in internal energy demand
- Methane, fossil [air, urban air close to ground]: 6.1627e-7 kg; lognormal variance with pedigree 0.0491, pedigree (1,1,4,1,1)
  (same comment as for Benzene)
- NMVOC, non-methane volatile organic compounds [air, urban air close to ground]: 1.8697e-6 kg; lognormal variance with pedigree 0.0491, pedigree (1,1,4,1,1)
  (same comment as for Benzene)
- Nitrogen oxides [air, urban air close to ground]: 8.9606e-5 kg; lognormal variance with pedigree 0.17159, pedigree (1,1,4,1,1)
  Sum of fuel-Nox and thermal-NOx emitted to air after DeNOx stage.
  Uncertainty: uncertainty calculated from uncertainty in average N-emissions and uncertainty in the share of thermal NOx and the uncertainty in nitrogen content in *this* waste.
- Particulate Matter, < 2.5 um [air, urban air close to ground]: 4.9052e-6 kg; lognormal variance with pedigree 0.30974, pedigree (1,1,4,1,1)
  (same comment as for Benzene)
- Particulate Matter, > 2.5 um and < 10um [air, urban air close to ground]: 2.4649e-8 kg; lognormal variance with pedigree 0.12811, pedigree (1,1,4,1,1)
  (same comment as for Benzene)
- Phenol, pentachloro- [air, urban air close to ground]: 1.7892e-11 kg; lognormal variance with pedigree 0.0491, pedigree (1,1,4,1,1)
  (same comment as for Benzene)
- Toluene [air, urban air close to ground]: 8.2169e-8 kg; lognormal variance with pedigree 0.0491, pedigree (1,1,4,1,1)
  (same comment as for Benzene)
- Aluminium III [water, ground-, long-term]: 0.037625 kg; lognormal variance with pedigree 0.21424, pedigree (1,1,4,1,1)
  Long-term emissions from landfilling of incineration residues.
  Uncertainty: uncertainty is calculated from uncertainties in waste composition and transfer coefficients in incinerator and landfills.
- Aluminium III [water, surface water]: 6.0519e-7 kg; lognormal variance with pedigree 1.4279, pedigree (1,1,4,1,1)
  Emissions to water from waste composition and transfer coefficients in incinerator and landfills.
  Uncertainty: uncertainty is calculated from uncertainties in waste composition and transfer coefficients in incinerator and landfills
- Antimony ion [water, ground-, long-term]: 5.4989e-6 kg; lognormal variance with pedigree 2.0329, pedigree (1,1,4,1,1)
  (same comment as for Aluminium III)
- Antimony ion [water, surface water]: 2.5625e-8 kg; lognormal variance with pedigree 1.8029, pedigree (1,1,4,1,1)
  (same comment as for Aluminium III)
- Arsenic ion [water, ground-, long-term]: 4.5931e-5 kg; lognormal variance with pedigree 1.0734, pedigree (1,1,4,1,1)
  (same comment as for Aluminium III)
- Arsenic ion [water, surface water]: 6.9195e-8 kg; lognormal variance with pedigree 1.6735, pedigree (1,1,4,1,1)
  (same comment as for Aluminium III)
- BOD5, Biological Oxygen Demand [water, ground-, long-term]: 0.041183 kg; lognormal variance with pedigree 0.12932, pedigree (1,1,4,1,1)
  (same comment as for Aluminium III)
- BOD5, Biological Oxygen Demand [water, surface water]: 0.00014865 kg; lognormal variance with pedigree 0.61879, pedigree (1,1,4,1,1)
  (same comment as for Aluminium III)
- Barium II [water, ground-, long-term]: 0.00097985 kg; lognormal variance with pedigree 0.66824, pedigree (1,1,4,1,1)
  (same comment as for Aluminium III)
- Barium II [water, surface water]: 1.5021e-7 kg; lognormal variance with pedigree 1.5673, pedigree (1,1,4,1,1)
  (same comment as for Aluminium III)
- Beryllium II [water, ground-, long-term]: 9.7938e-6 kg; lognormal variance with pedigree 1.2786, pedigree (1,1,4,1,1)
  (same comment as for Aluminium III)
- Beryllium II [water, surface water]: 6.1712e-9 kg; lognormal variance with pedigree 1.9916, pedigree (1,1,4,1,1)
  (same comment as for Aluminium III)
- Boron [water, ground-, long-term]: 0.0017473 kg; lognormal variance with pedigree 0.57786, pedigree (1,1,4,1,1)
  (same comment as for Aluminium III)
- Boron [water, surface water]: 1.6454e-5 kg; lognormal variance with pedigree 0.96331, pedigree (1,1,4,1,1)
  (same comment as for Aluminium III)
- Bromine [water, ground-, long-term]: 3.492e-12 kg; lognormal variance with pedigree 1.1244, pedigree (1,1,4,1,1)
  (same comment as for Aluminium III)
- Bromine [water, surface water]: 3.88e-5 kg; lognormal variance with pedigree 1.096, pedigree (1,1,4,1,1)
  (same comment as for Aluminium III)
- COD, Chemical Oxygen Demand [water, ground-, long-term]: 0.1259 kg; lognormal variance with pedigree 0.12932, pedigree (1,1,4,1,1)
  (same comment as for Aluminium III)
- COD, Chemical Oxygen Demand [water, surface water]: 0.00045445 kg; lognormal variance with pedigree 0.61879, pedigree (1,1,4,1,1)
  (same comment as for Aluminium III)
- Cadmium II [water, ground-, long-term]: 5.4872e-6 kg; lognormal variance with pedigree 1.355, pedigree (1,1,4,1,1)
  (same comment as for Aluminium III)
- Cadmium II [water, surface water]: 2.8246e-9 kg; lognormal variance with pedigree 2.0945, pedigree (1,1,4,1,1)
  (same comment as for Aluminium III)
- Calcium II [water, ground-, long-term]: 0.19514 kg; lognormal variance with pedigree 0.074788, pedigree (1,1,4,1,1)
  (same comment as for Aluminium III)
- Calcium II [water, surface water]: 0.00085522 kg; lognormal variance with pedigree 0.54017, pedigree (1,1,4,1,1)
  (same comment as for Aluminium III)
- Chromium VI [water, ground-, long-term]: 8.7946e-7 kg; lognormal variance with pedigree 4.2485, pedigree (1,1,4,1,1)
  (same comment as for Aluminium III)
- Chromium VI [water, surface water]: 3.8433e-9 kg; lognormal variance with pedigree 2.052, pedigree (1,1,4,1,1)
  (same comment as for Aluminium III)
- Cobalt II [water, ground-, long-term]: 0.00014698 kg; lognormal variance with pedigree 0.91876, pedigree (1,1,4,1,1)
  (same comment as for Aluminium III)
- Cobalt II [water, surface water]: 2.0451e-8 kg; lognormal variance with pedigree 1.8306, pedigree (1,1,4,1,1)
  (same comment as for Aluminium III)
- Copper ion [water, ground-, long-term]: 5.8498e-5 kg; lognormal variance with pedigree 1.0414, pedigree (1,1,4,1,1)
  (same comment as for Aluminium III)
- Copper ion [water, surface water]: 2.0311e-9 kg; lognormal variance with pedigree 2.137, pedigree (1,1,4,1,1)
  (same comment as for Aluminium III)
- DOC, Dissolved Organic Carbon [water, ground-, long-term]: 0.04982 kg; lognormal variance with pedigree 0.12932, pedigree (1,1,4,1,1)
  (same comment as for Aluminium III)
- DOC, Dissolved Organic Carbon [water, surface water]: 0.00017983 kg; lognormal variance with pedigree 0.61879, pedigree (1,1,4,1,1)
  (same comment as for Aluminium III)
- Heat, waste [water, surface water]: 0.5254 MJ; lognormal variance with pedigree 0.16154, pedigree (1,1,4,1,1)
  (same comment as for Heat, waste)
- Iodide [water, ground-, long-term]: 1.476e-12 kg; lognormal variance with pedigree 1.2387, pedigree (1,1,4,1,1)
  (same comment as for Aluminium III)
- Iodide [water, surface water]: 1.64e-5 kg; lognormal variance with pedigree 1.2104, pedigree (1,1,4,1,1)
  (same comment as for Aluminium III)
- Iron ion [water, ground-, long-term]: 0.027529 kg; lognormal variance with pedigree 0.29665, pedigree (1,1,4,1,1)
  (same comment as for Aluminium III)
- Iron ion [water, surface water]: 4.4279e-7 kg; lognormal variance with pedigree 1.4732, pedigree (1,1,4,1,1)
  (same comment as for Aluminium III)
- Lead II [water, ground-, long-term]: 4.6999e-5 kg; lognormal variance with pedigree 1.0705, pedigree (1,1,4,1,1)
  (same comment as for Aluminium III)
- Lead II [water, surface water]: 8.5792e-10 kg; lognormal variance with pedigree 2.2511, pedigree (1,1,4,1,1)
  (same comment as for Aluminium III)
- Magnesium [water, ground-, long-term]: 0.029288 kg; lognormal variance with pedigree 0.25163, pedigree (1,1,4,1,1)
  (same comment as for Aluminium III)
- Magnesium [water, surface water]: 0.0001117 kg; lognormal variance with pedigree 0.73426, pedigree (1,1,4,1,1)
  (same comment as for Aluminium III)
- Manganese II [water, ground-, long-term]: 0.00019799 kg; lognormal variance with pedigree 0.87917, pedigree (1,1,4,1,1)
  (same comment as for Aluminium III)
- Manganese II [water, surface water]: 1.0134e-8 kg; lognormal variance with pedigree 1.9234, pedigree (1,1,4,1,1)
  (same comment as for Aluminium III)
- Mercury II [water, ground-, long-term]: 9.738e-8 kg; lognormal variance with pedigree 1.872, pedigree (1,1,4,1,1)
  (same comment as for Aluminium III)
- Mercury II [water, surface water]: 2.6198e-9 kg; lognormal variance with pedigree 2.126, pedigree (1,1,4,1,1)
  (same comment as for Aluminium III)
- Molybdenum VI [water, ground-, long-term]: 6.3401e-5 kg; lognormal variance with pedigree 1.0245, pedigree (1,1,4,1,1)
  (same comment as for Aluminium III)
- Molybdenum VI [water, surface water]: 3.0984e-6 kg; lognormal variance with pedigree 1.2175, pedigree (1,1,4,1,1)
  (same comment as for Aluminium III)
- Nickel II [water, ground-, long-term]: 0.00014541 kg; lognormal variance with pedigree 0.92013, pedigree (1,1,4,1,1)
  (same comment as for Aluminium III)
- Nickel II [water, surface water]: 9.1624e-8 kg; lognormal variance with pedigree 1.6332, pedigree (1,1,4,1,1)
  (same comment as for Aluminium III)
- Phosphate [water, ground-, long-term]: 1.5858e-5 kg; lognormal variance with pedigree 5.4705, pedigree (1,1,4,1,1)
  (same comment as for Aluminium III)
- Phosphate [water, surface water]: 2.6473e-8 kg; lognormal variance with pedigree 1.9444, pedigree (1,1,4,1,1)
  (same comment as for Aluminium III)
- Potassium I [water, ground-, long-term]: 0.0051694 kg; lognormal variance with pedigree 0.44094, pedigree (1,1,4,1,1)
  (same comment as for Aluminium III)
- Potassium I [water, surface water]: 0.0007106 kg; lognormal variance with pedigree 0.54386, pedigree (1,1,4,1,1)
  (same comment as for Aluminium III)
- Scandium [water, ground-, long-term]: 4.6508e-6 kg; lognormal variance with pedigree 1.3689, pedigree (1,1,4,1,1)
  (same comment as for Aluminium III)
- Scandium [water, surface water]: 2.9916e-7 kg; lognormal variance with pedigree 1.5358, pedigree (1,1,4,1,1)
  (same comment as for Aluminium III)
- Selenium IV [water, ground-, long-term]: 1.3443e-5 kg; lognormal variance with pedigree 1.2317, pedigree (1,1,4,1,1)
  (same comment as for Aluminium III)
- Selenium IV [water, surface water]: 2.2265e-7 kg; lognormal variance with pedigree 1.5416, pedigree (1,1,4,1,1)
  (same comment as for Aluminium III)
- Silicon [water, ground-, long-term]: 0.0040248 kg; lognormal variance with pedigree 5.6914, pedigree (1,1,4,1,1)
  (same comment as for Aluminium III)
- Silicon [water, surface water]: 1.7357e-5 kg; lognormal variance with pedigree 1.1119, pedigree (1,1,4,1,1)
  (same comment as for Aluminium III)
- Sodium I [water, ground-, long-term]: 0.0077436 kg; lognormal variance with pedigree 0.3915, pedigree (1,1,4,1,1)
  (same comment as for Aluminium III)
- Sodium I [water, surface water]: 0.0010764 kg; lognormal variance with pedigree 0.49358, pedigree (1,1,4,1,1)
  (same comment as for Aluminium III)
- Strontium [water, ground-, long-term]: 0.00067857 kg; lognormal variance with pedigree 0.71627, pedigree (1,1,4,1,1)
  (same comment as for Aluminium III)
- Strontium [water, surface water]: 4.2758e-7 kg; lognormal variance with pedigree 1.4293, pedigree (1,1,4,1,1)
  (same comment as for Aluminium III)
- TOC, Total Organic Carbon [water, ground-, long-term]: 0.04982 kg; lognormal variance with pedigree 0.12932, pedigree (1,1,4,1,1)
  (same comment as for Aluminium III)
- TOC, Total Organic Carbon [water, surface water]: 0.00017983 kg; lognormal variance with pedigree 0.61879, pedigree (1,1,4,1,1)
  (same comment as for Aluminium III)
- Thallium I [water, ground-, long-term]: 1.8988e-7 kg; lognormal variance with pedigree 1.7906, pedigree (1,1,4,1,1)
  (same comment as for Aluminium III)
- Thallium I [water, surface water]: 1.1965e-10 kg; lognormal variance with pedigree 2.5036, pedigree (1,1,4,1,1)
  (same comment as for Aluminium III)
- Tin ion [water, ground-, long-term]: 1.5752e-5 kg; lognormal variance with pedigree 1.215, pedigree (1,1,4,1,1)
  (same comment as for Aluminium III)
- Tin ion [water, surface water]: 2.5336e-10 kg; lognormal variance with pedigree 2.413, pedigree (1,1,4,1,1)
  (same comment as for Aluminium III)
- Titanium ion [water, ground-, long-term]: 0.00029393 kg; lognormal variance with pedigree 1.0308, pedigree (1,1,4,1,1)
  (same comment as for Aluminium III)
- Titanium ion [water, surface water]: 4.7279e-9 kg; lognormal variance with pedigree 2.0237, pedigree (1,1,4,1,1)
  (same comment as for Aluminium III)
- Vanadium V [water, ground-, long-term]: 3.3182e-5 kg; lognormal variance with pedigree 2.1595, pedigree (1,1,4,1,1)
  (same comment as for Aluminium III)
- Vanadium V [water, surface water]: 1.5061e-7 kg; lognormal variance with pedigree 1.5666, pedigree (1,1,4,1,1)
  (same comment as for Aluminium III)
- Zinc II [water, ground-, long-term]: 0.00026599 kg; lognormal variance with pedigree 0.83999, pedigree (1,1,4,1,1)
  (same comment as for Aluminium III)
- Zinc II [water, surface water]: 7.9182e-9 kg; lognormal variance with pedigree 1.956, pedigree (1,1,4,1,1)
  (same comment as for Aluminium III)
