# treatment of sewage sludge, 97% water, WWT, WW from ceramic production, landfarming

Dataset: EcoSpold 2, unit process
Geography: RoW
Time period: 2000-01-01 to 2022-12-31
Technology level: current
Classification: ISIC rev.4 ecoinvent: 3821:Treatment and disposal of non-hazardous waste
Scenario: Business-as-Usual
System model: Allocation at the point of substitution
Generated by: Nikolia Stoikou
Database: ecoinvent
isCopyrightProtected: true

## General comment
The process represents the treatment of a waste (sewage sludge) that is exclusively produced from another waste treatment. Recommended use of this dataset: to be used within the specific chain of treatments for 'wastewater from ceramic production'. Share of biogenic carbon in the sludge: 0%.

## Included activities start
The activity starts with the waste being available for landfarming. Collection and transportation of the waste to this process is not included.

## Included activities end
The activity ends with the waste being treated and waste-specific emissions from the landfarming process are released to the environment (air, water and soil). The activity is considering local fate of emissions and the initial specific wastewater composition (generating the sewage sludge). Further, it includes provision of fertiliser functions for N, P, K, if present in the sludge.

## Geography
The site has mean annual temperature (MAT) of 16.743579766537 degC, mean annual precipitation (MAP) of 1250.84108527132 mm/year, mean annual actual evaporation (EAT) of 460.58904958214 mm/year. Climate will influence the local fate emissions based on the elemental composition of the sludge as well as water evaporation to air (= consumptive water use).
References: UN data, 2020. Precipitation, Environment Statistics Database, United Nations Statistics Division Available at: http://data.un.org/Data.aspx?q=precipitation&d=ENV&f=variableID%3a6;
World Bank, 2022. Surface area (sq.km), World Bank Group Available at: https://data.worldbank.org/indicator/AG.SRF.TOTL.K2;
Doka G.,2021. A model for composition-specific life cycle inventories of regionalised wastewater fates, Zurich, Switzerland. http://www.doka.ch/publications.htm

## Technology
Landfarming is the process of spreading a substrate on agricultural soil. Sewage sludge is generated in the wastewater treatment of wastewater from ceramic production. Spreading of liquid sewage sludge (97w% water content) on agricultural fields with mobile vacuum tanker.

## Reference product
- organic nitrogen fertiliser, as N: 1 kg; By-product classification allocatable product; CPC 34659: Fertilizers n.e.c.
  gross fertilizer function provided from sewage sludge spreading on agricultural fields.
  production volume 5.59033e-8 kg
    Calculated in proportion to wastewater reference product.
  property nitrogen content 1
    Nitrogen content (on a dry matter basis) of organic nitrogen fertiliser, as N is calculated from the molecular formula of the substance (Nitrogen).
  property price 0.473 EUR2005
    Set equal to the price of the corresponding inorganic fertiliser
  properties: carbon allocation 0 kg, carbon content 0, carbon content, fossil 0, carbon content, non-fossil 0, dry mass 1 kg, water content 0, water in wet mass 0 kg, wet mass 1 kg

## Inputs from technosphere
- ammonia, anhydrous, liquid: 9.69102e-5, 1.01572e-5, 9.89146e-5, 0.000373297, 4.99227e-5, 4.54066e-5, 0.00107419, 3.20893e-5 kg (8 suppliers, which the file names only by identifier); sum of these 0.00178088 kg
- bilge oil: -2.60776e-7, -5.4227e-7 kg (2 suppliers, which the file names only by identifier); sum of these -8.03045e-7 kg
- ceramic factory: 1.81479e-11 unit
- chemical factory, organics: 1.26531e-11 unit
- chemical, inorganic: 1.3747e-5 kg
- clay: 0.00192822 kg
- electricity, medium voltage: 0.010139, 0.00316368, 9.42143e-5, 0.00048072, 0.000513801, 0.029027, 0.000160058, 0.00158774 kWh (8 suppliers, which the file names only by identifier); sum of these 0.0451662 kWh
- feldspar: 0.00171952 kg
- hazardous waste, for underground deposit: -4.62772e-7 kg
- heat, district or industrial, natural gas: 0.0276829, 0.0819893, 0.00134729 MJ (3 suppliers, which the file names only by identifier); sum of these 0.111019 MJ
- hydrochloric acid, without water, in 30% solution state: 0.00194348 kg
- indium: 0.000525011 kg
- inert waste, for final disposal: -0.000576196 kg
- kaolin: 0.00201442 kg
- methanol: 0.00010761 kg
- municipal solid waste: -2.2848e-7, -1.31687e-5, -8.22729e-8, -0.00016159, -5.75713e-8 kg (5 suppliers, which the file names only by identifier); sum of these -0.000175127 kg
- polyethylene, high density, granulate: 6.85084e-6 kg
- silica sand: 0.00113878 kg
- sodium hydroxide, without water, in 50% solution state: 0.00326272 kg
- spent solvent mixture: -2.26077e-7, -8.8336e-8 kg (2 suppliers, which the file names only by identifier); sum of these -3.14413e-7 kg
- stucco: 0.000567123 kg
- tap water: 2.76079e-6, 0.000115052, 4.56266e-6, 8.5137e-6, 0.0013166, 2.99306e-6, 0.000981087, 2.29353e-5 kg (8 suppliers, which the file names only by identifier); sum of these 0.00245451 kg
- tin: 5.36122e-5 kg
- waste emulsion paint: -6.55091e-10, -6.17517e-11 kg (2 suppliers, which the file names only by identifier); sum of these -7.16843e-10 kg
- waste mineral oil: -9.29117e-7, -3.54849e-7 kg (2 suppliers, which the file names only by identifier); sum of these -1.28397e-6 kg
- waste plastic, mixture: -2.19041e-8, -1.10686e-10, -2.4421e-10, -1.53341e-7, -1.46355e-9, -1.86633e-8, -5.74026e-10, -6.04497e-10 kg (8 suppliers, which the file names only by identifier); sum of these -1.96905e-7 kg
- wastewater from ceramic production: -0.000241906 m3
- water, deionised: 0.237446 kg

## Inputs from nature
- Water, well, in ground [natural resource, in water]: 4.8092e-5 m3

## Emissions to nature
- Ethanol [air, urban air close to ground]: 0.00010761 kg
- Particulate Matter, < 2.5 um [air, unspecified]: 3.95171e-5 kg
- Water [air, unspecified]: 7.58197e-6 m3
- Water [water, unspecified]: 3.85047e-5 m3
