# treatment of blast furnace sludge, residual material landfill

Dataset: EcoSpold 2, unit process
Geography: RoW
Time period: 1987-01-01 to 2022-12-31
Technology level: current
Classification: ISIC rev.4 ecoinvent: 3821:Treatment and disposal of non-hazardous waste
Scenario: Business-as-Usual
System model: Allocation at the point of substitution
Generated by: Avraam Symeonidis
Database: ecoinvent
isCopyrightProtected: true

## General comment
Steelmaking produces large quantities of by-products, with around 450-500 kg of by-products produced per tonne of steel. The main components of these are slags (approximately 80%), along with dusts and sludges from air pollution abatement equipment (flue gas scrubbing) and mill scale. The physical or chemical natures of these by-products means that it can be difficult to find possible uses. Hence, most of these by-products have historically been disposed of in landfills. However, new legislation and financial instruments, such as landfill taxes, mean that landfilling is now a costly and undesirable management solution. Instead, considerable efforts have been made to recover by-products for internal reuse or to sell them to other industries to recover value. The fraction of steelmaking by-products that is sent to landfill has drastically reduced. This activity represents the disposal of 'blast furnace sludge' in a residual material landfill. This type of landfill is designed to receive mostly inorganic (low carbon, <5 w-%) wastes in a physically stable form. Further information is provided in ecoinvent report no. 13, Part II: Landfills – Underground Deposits – Landfarming (Doka, 2009).
References
Doka, G. (2009). Life cycle inventories of waste treatment services. Ecoinvent report no. 13. Swiss Centre for Life Cycle Inventories, Dubendorf, Switzerland.
Inventoried waste contains 100% blast furnace sludge; .
waste composition (wet, in ppm): H2O 320000; O 158760; H n.a.; C 207000; S 6890; N n.a.; P 658; B n.a.; Cl 471; Br n.a.; F 1520; I n.a.; Ag n.a.; As 52.5; Ba 105; Cd n.a.; Co n.a.; Cr 45.2; Cu 39.6; Hg n.a.; Mn 1990; Mo 6.12; Ni 84.1; Pb 2140; Sb 25.8; Se n.a.; Sn 5.77; V 1390; Zn 10200; Be n.a.; Sc 2.72; Sr 66.8; Ti 1120; Tl n.a.; W n.a.; Si 27900; Fe 194000; Ca 35900; Al 11100; K 1690; Mg 14600; Na 2240;
Share of carbon in waste that is biogenic 0%.
Additional solidification with 0.4 kg of cement. Note that value for oxygen content was calculated by assuming that other elements in the material are present as oxides and that any missing mass (either not reported or not detected) was assumed to be oxygen.

## Included activities start
Activity starts with the reception of the waste.

## Included activities end
Waste-specific short-term emissions to water from leachate. Long-term emissions from landfill to ground water. Expenditures for solidification with cement.

## Technology
Time period based on the range of years of publication from which composition data were taken. Note that the Residual Material Landfill modelling tool was published in 2009.

## Reference product
- blast furnace sludge: -1 kg; name RP; By-product classification Waste; CPC 39310: Slag, dross, scalings and other waste from the manufacture of iron or steel
  production volume 2.05259e8 kg
    Assuming that 10.8% of blast furnace sludge is sent for disposal in landfill (worldsteel, 2010).
    References:
    Worldsteel (2010). Steel industry by-products. World Steel Association: Brussels, Belgium.
  property aluminium content 0.0163235
    The value of 'aluminium content' is documented in Turner & Symeonidis, 2020.
    Reference: Turner David & Symeonidis Avraam, 2020, Life cycle inventories of the treatment of iron and steelmaking by-products, ecoinvent association, Zürich, Switzerland
  property antimony content 3.79412e-5
    The value of 'antimony content' is documented in Turner & Symeonidis, 2020.
    Reference: Turner David & Symeonidis Avraam, 2020, Life cycle inventories of the treatment of iron and steelmaking by-products, ecoinvent association, Zürich, Switzerland
  property arsenic content 7.72059e-5
    The value of 'arsenic content' is documented in Turner & Symeonidis, 2020.
    Reference: Turner David & Symeonidis Avraam, 2020, Life cycle inventories of the treatment of iron and steelmaking by-products, ecoinvent association, Zürich, Switzerland
  property barium content 0.000154412
    The value of 'barium content' is documented in Turner & Symeonidis, 2020.
    Reference: Turner David & Symeonidis Avraam, 2020, Life cycle inventories of the treatment of iron and steelmaking by-products, ecoinvent association, Zürich, Switzerland
  property calcium content 0.0527941
    The value of 'calcium content' is documented in Turner & Symeonidis, 2020.
    Reference: Turner David & Symeonidis Avraam, 2020, Life cycle inventories of the treatment of iron and steelmaking by-products, ecoinvent association, Zürich, Switzerland
  property carbon content, fossil 0.304412
    The value of 'carbon content, fossil' is documented in Turner & Symeonidis, 2020.
    Reference: Turner David & Symeonidis Avraam, 2020, Life cycle inventories of the treatment of iron and steelmaking by-products, ecoinvent association, Zürich, Switzerland
  property carbon content, non-fossil 0
    The value of 'carbon content, non-fossil' is documented in Turner & Symeonidis, 2020.
    Reference: Turner David & Symeonidis Avraam, 2020, Life cycle inventories of the treatment of iron and steelmaking by-products, ecoinvent association, Zürich, Switzerland
  property chlorine content 0.000692647
    The value of 'chlorine content' is documented in Turner & Symeonidis, 2020.
    Reference: Turner David & Symeonidis Avraam, 2020, Life cycle inventories of the treatment of iron and steelmaking by-products, ecoinvent association, Zürich, Switzerland
  property chromium content 6.64706e-5
    The value of 'chromium content' is documented in Turner & Symeonidis, 2020.
    Reference: Turner David & Symeonidis Avraam, 2020, Life cycle inventories of the treatment of iron and steelmaking by-products, ecoinvent association, Zürich, Switzerland
  property copper content 5.82353e-5
    The value of 'copper content' is documented in Turner & Symeonidis, 2020.
    Reference: Turner David & Symeonidis Avraam, 2020, Life cycle inventories of the treatment of iron and steelmaking by-products, ecoinvent association, Zürich, Switzerland
  property fluorine content 0.00223529
    The value of 'fluorine content' is documented in Turner & Symeonidis, 2020.
    Reference: Turner David & Symeonidis Avraam, 2020, Life cycle inventories of the treatment of iron and steelmaking by-products, ecoinvent association, Zürich, Switzerland
  property iron content 0.285294
    The value of 'iron content' is documented in Turner & Symeonidis, 2020.
    Reference: Turner David & Symeonidis Avraam, 2020, Life cycle inventories of the treatment of iron and steelmaking by-products, ecoinvent association, Zürich, Switzerland
  property lead content 0.00314706
    The value of 'lead content' is documented in Turner & Symeonidis, 2020.
    Reference: Turner David & Symeonidis Avraam, 2020, Life cycle inventories of the treatment of iron and steelmaking by-products, ecoinvent association, Zürich, Switzerland
  property magnesium content 0.0214706
    The value of 'magnesium content' is documented in Turner & Symeonidis, 2020.
    Reference: Turner David & Symeonidis Avraam, 2020, Life cycle inventories of the treatment of iron and steelmaking by-products, ecoinvent association, Zürich, Switzerland
  property manganese content 0.00292647
    The value of 'manganese content' is documented in Turner & Symeonidis, 2020.
    Reference: Turner David & Symeonidis Avraam, 2020, Life cycle inventories of the treatment of iron and steelmaking by-products, ecoinvent association, Zürich, Switzerland
  property molybdenum content 9e-6
    The value of 'molybdenum content' is documented in Turner & Symeonidis, 2020.
    Reference: Turner David & Symeonidis Avraam, 2020, Life cycle inventories of the treatment of iron and steelmaking by-products, ecoinvent association, Zürich, Switzerland
  property nickel content 0.000123676
    The value of 'nickel content' is documented in Turner & Symeonidis, 2020.
    Reference: Turner David & Symeonidis Avraam, 2020, Life cycle inventories of the treatment of iron and steelmaking by-products, ecoinvent association, Zürich, Switzerland
  property oxygen content 0.233467
    The value of 'oxygen content' is documented in Turner & Symeonidis, 2020.
    Reference: Turner David & Symeonidis Avraam, 2020, Life cycle inventories of the treatment of iron and steelmaking by-products, ecoinvent association, Zürich, Switzerland
  property phosphorus content 0.000967647
    The value of 'phosphorus content' is documented in Turner & Symeonidis, 2020.
    Reference: Turner David & Symeonidis Avraam, 2020, Life cycle inventories of the treatment of iron and steelmaking by-products, ecoinvent association, Zürich, Switzerland
  property potassium content 0.00248529
    The value of 'potassium content' is documented in Turner & Symeonidis, 2020.
    Reference: Turner David & Symeonidis Avraam, 2020, Life cycle inventories of the treatment of iron and steelmaking by-products, ecoinvent association, Zürich, Switzerland
  property price 0 EUR2005
    Waste products are assigned a price of zero as they are assumed to require further treatment.
  property scandium content 4e-6
    The value of 'scandium content' is documented in Turner & Symeonidis, 2020.
    Reference: Turner David & Symeonidis Avraam, 2020, Life cycle inventories of the treatment of iron and steelmaking by-products, ecoinvent association, Zürich, Switzerland
  property silicon content 0.0410294
    The value of 'silicon content' is documented in Turner & Symeonidis, 2020.
    Reference: Turner David & Symeonidis Avraam, 2020, Life cycle inventories of the treatment of iron and steelmaking by-products, ecoinvent association, Zürich, Switzerland
  property sodium content 0.00329412
    The value of 'sodium content' is documented in Turner & Symeonidis, 2020.
    Reference: Turner David & Symeonidis Avraam, 2020, Life cycle inventories of the treatment of iron and steelmaking by-products, ecoinvent association, Zürich, Switzerland
  property strontium content 9.82353e-5
    The value of 'strontium content' is documented in Turner & Symeonidis, 2020.
    Reference: Turner David & Symeonidis Avraam, 2020, Life cycle inventories of the treatment of iron and steelmaking by-products, ecoinvent association, Zürich, Switzerland
  property sulfur content 0.0101324
    The value of 'sulfur content' is documented in Turner & Symeonidis, 2020.
    Reference: Turner David & Symeonidis Avraam, 2020, Life cycle inventories of the treatment of iron and steelmaking by-products, ecoinvent association, Zürich, Switzerland
  property tin content 8.48529e-6
    The value of 'tin content' is documented in Turner & Symeonidis, 2020.
    Reference: Turner David & Symeonidis Avraam, 2020, Life cycle inventories of the treatment of iron and steelmaking by-products, ecoinvent association, Zürich, Switzerland
  property titanium content 0.00164706
    The value of 'titanium content' is documented in Turner & Symeonidis, 2020.
    Reference: Turner David & Symeonidis Avraam, 2020, Life cycle inventories of the treatment of iron and steelmaking by-products, ecoinvent association, Zürich, Switzerland
  property vanadium content 0.00204412
    The value of 'vanadium content' is documented in Turner & Symeonidis, 2020.
    Reference: Turner David & Symeonidis Avraam, 2020, Life cycle inventories of the treatment of iron and steelmaking by-products, ecoinvent association, Zürich, Switzerland
  property zinc content 0.015
    The value of 'zinc content' is documented in Turner & Symeonidis, 2020.
    Reference: Turner David & Symeonidis Avraam, 2020, Life cycle inventories of the treatment of iron and steelmaking by-products, ecoinvent association, Zürich, Switzerland
  properties: carbon allocation 0.207 kg, carbon content 0.304412, dry mass 0.68 kg, heating value, net 0 MJ, water content 0.470588, water in wet mass 0.32 kg, wet mass 1 kg

## Inputs from technosphere
- cement, unspecified: 0.347241, 0.00130283, 0.000852173, 0.0344809, 0.00907928, 0.00108232, 0.000428767, 0.00553294 kg (8 suppliers, which the file names only by identifier); sum of these 0.4 kg; lognormal variance with pedigree 0.091084, pedigree (1,1,5,5,4)
  Cement for solidification of residual material waste. Uncertainty in mass from solidification recipe.
  properties: dry mass 1 kg, wet mass 1 kg
- process-specific burdens, residual material landfill: 1 kg; lognormal variance with pedigree 0.082, pedigree (1,1,5,5,4)
  demands per kilogram waste. uncertainty is heeded in the module
- residual material landfill: 2.08333e-9 unit; lognormal variance with pedigree 0.082, pedigree (1,1,5,5,4)
  demands per kilogram waste. uncertainty is heeded in the module
- waste cement, hydrated: -1 kg; name BP; lognormal variance with pedigree 0.059084, pedigree (1,1,4,5,4)
  Hydrated cement for solidification of residual material waste. Uncertainty in mass from solidification recipe.
  production volume
    Calculated based on the production volume of the reference product.
  properties: dry mass 1 kg, wet mass 1 kg

## Emissions to nature
- Aluminium III [water, ground-, long-term]: 0.00329506 kg; lognormal variance with pedigree 0.805667, pedigree (1,1,5,5,4)
  uncertainty is calculated from uncertainties in waste composition and transfer coefficients in incinerator and landfills.
- Aluminium III [water, surface water]: 5.50094e-6 kg; lognormal variance with pedigree 1.18136, pedigree (1,1,5,5,4)
  uncertainty is calculated from uncertainties in waste composition and transfer coefficients in residual landfill
- Antimony ion [water, ground-, long-term]: 1.67014e-5 kg; lognormal variance with pedigree 1.2297, pedigree (1,1,5,5,4)
  (same comment as for Aluminium III)
- Antimony ion [water, surface water]: 9.09859e-6 kg; lognormal variance with pedigree 1.25385, pedigree (1,1,5,5,4)
  (same comment as for Aluminium III)
- Arsenic ion [water, ground-, long-term]: 5.25e-14 kg; lognormal variance with pedigree 1.15345, pedigree (1,1,5,5,4)
  (same comment as for Aluminium III)
- Arsenic ion [water, surface water]: 5.25e-5 kg; lognormal variance with pedigree 1.12981, pedigree (1,1,5,5,4)
  (same comment as for Aluminium III)
- BOD5, Biological Oxygen Demand [water, ground-, long-term]: 0.110581 kg; lognormal variance with pedigree 0.192485, pedigree (1,1,5,5,4)
  (same comment as for Aluminium III)
- BOD5, Biological Oxygen Demand [water, surface water]: 0.00018461 kg; lognormal variance with pedigree 0.787896, pedigree (1,1,5,5,4)
  (same comment as for Aluminium III)
- Barium II [water, ground-, long-term]: 8.67331e-7 kg; lognormal variance with pedigree 6.78864, pedigree (1,1,5,5,4)
  (same comment as for Aluminium III)
- Barium II [water, surface water]: 1.44796e-9 kg; lognormal variance with pedigree 2.25508, pedigree (1,1,5,5,4)
  (same comment as for Aluminium III)
- COD, Chemical Oxygen Demand [water, ground-, long-term]: 0.338068 kg; lognormal variance with pedigree 0.192485, pedigree (1,1,5,5,4)
  (same comment as for Aluminium III)
- COD, Chemical Oxygen Demand [water, surface water]: 0.000564387 kg; lognormal variance with pedigree 0.787896, pedigree (1,1,5,5,4)
  (same comment as for Aluminium III)
- Calcium II [water, ground-, long-term]: 0.00324386 kg; lognormal variance with pedigree 1.74885, pedigree (1,1,5,5,4)
  (same comment as for Aluminium III)
- Calcium II [water, surface water]: 5.41546e-6 kg; lognormal variance with pedigree 1.20525, pedigree (1,1,5,5,4)
  (same comment as for Aluminium III)
- Chloride [water, ground-, long-term]: 0.000336289 kg; lognormal variance with pedigree 0.842353, pedigree (1,1,5,5,4)
  (same comment as for Aluminium III)
- Chloride [water, surface water]: 0.000134711 kg; lognormal variance with pedigree 0.8797, pedigree (1,1,5,5,4)
  (same comment as for Aluminium III)
- Chromium VI [water, ground-, long-term]: 8.58291e-6 kg; lognormal variance with pedigree 1.15637, pedigree (1,1,5,5,4)
  (same comment as for Aluminium III)
- Chromium VI [water, surface water]: 2.71709e-6 kg; lognormal variance with pedigree 1.31743, pedigree (1,1,5,5,4)
  (same comment as for Aluminium III)
- Copper ion [water, ground-, long-term]: 1.52438e-6 kg; lognormal variance with pedigree 3.81972, pedigree (1,1,5,5,4)
  (same comment as for Aluminium III)
- Copper ion [water, surface water]: 2.54488e-9 kg; lognormal variance with pedigree 2.18144, pedigree (1,1,5,5,4)
  (same comment as for Aluminium III)
- DOC, Dissolved Organic Carbon [water, ground-, long-term]: 0.133774 kg; lognormal variance with pedigree 0.192485, pedigree (1,1,5,5,4)
  (same comment as for Aluminium III)
- DOC, Dissolved Organic Carbon [water, surface water]: 0.000223329 kg; lognormal variance with pedigree 0.787896, pedigree (1,1,5,5,4)
  (same comment as for Aluminium III)
- Fluoride [water, ground-, long-term]: 0.00143763 kg; lognormal variance with pedigree 0.685483, pedigree (1,1,5,5,4)
  (same comment as for Aluminium III)
- Fluoride [water, surface water]: 8.23715e-5 kg; lognormal variance with pedigree 0.86316, pedigree (1,1,5,5,4)
  (same comment as for Aluminium III)
- Iron ion [water, ground-, long-term]: 0.000972322 kg; lognormal variance with pedigree 7.16123, pedigree (1,1,5,5,4)
  (same comment as for Aluminium III)
- Iron ion [water, surface water]: 1.62324e-6 kg; lognormal variance with pedigree 1.43282, pedigree (1,1,5,5,4)
  (same comment as for Aluminium III)
- Lead II [water, ground-, long-term]: 1.11004e-5 kg; lognormal variance with pedigree 7.56224, pedigree (1,1,5,5,4)
  (same comment as for Aluminium III)
- Lead II [water, surface water]: 1.85316e-8 kg; lognormal variance with pedigree 1.91997, pedigree (1,1,5,5,4)
  (same comment as for Aluminium III)
- Magnesium [water, ground-, long-term]: 0.00165889 kg; lognormal variance with pedigree 1.58718, pedigree (1,1,5,5,4)
  (same comment as for Aluminium III)
- Magnesium [water, surface water]: 2.76944e-6 kg; lognormal variance with pedigree 1.27556, pedigree (1,1,5,5,4)
  (same comment as for Aluminium III)
- Manganese II [water, ground-, long-term]: 1.6438e-5 kg; lognormal variance with pedigree 6.40162, pedigree (1,1,5,5,4)
  (same comment as for Aluminium III)
- Manganese II [water, surface water]: 2.74424e-8 kg; lognormal variance with pedigree 1.86806, pedigree (1,1,5,5,4)
  (same comment as for Aluminium III)
- Molybdenum VI [water, ground-, long-term]: 2.80972e-8 kg; lognormal variance with pedigree 1.43818, pedigree (1,1,5,5,4)
  (same comment as for Aluminium III)
- Molybdenum VI [water, surface water]: 6.0919e-6 kg; lognormal variance with pedigree 1.41469, pedigree (1,1,5,5,4)
  (same comment as for Aluminium III)
- Nickel II [water, ground-, long-term]: 3.04474e-5 kg; lognormal variance with pedigree 1.32509, pedigree (1,1,5,5,4)
  (same comment as for Aluminium III)
- Nickel II [water, surface water]: 5.08303e-8 kg; lognormal variance with pedigree 1.7855, pedigree (1,1,5,5,4)
  (same comment as for Aluminium III)
- Phosphate [water, ground-, long-term]: 0.00045074 kg; lognormal variance with pedigree 1.35551, pedigree (1,1,5,5,4)
  (same comment as for Aluminium III)
- Phosphate [water, surface water]: 7.52487e-7 kg; lognormal variance with pedigree 1.57605, pedigree (1,1,5,5,4)
  (same comment as for Aluminium III)
- Potassium I [water, ground-, long-term]: 0.00121361 kg; lognormal variance with pedigree 0.67539, pedigree (1,1,5,5,4)
  (same comment as for Aluminium III)
- Potassium I [water, surface water]: 0.000476385 kg; lognormal variance with pedigree 0.713695, pedigree (1,1,5,5,4)
  (same comment as for Aluminium III)
- Scandium [water, ground-, long-term]: 2.33613e-6 kg; lognormal variance with pedigree 1.52243, pedigree (1,1,5,5,4)
  (same comment as for Aluminium III)
- Scandium [water, surface water]: 3.83871e-7 kg; lognormal variance with pedigree 1.6123, pedigree (1,1,5,5,4)
  (same comment as for Aluminium III)
- Silicon [water, ground-, long-term]: 0.0278373 kg; lognormal variance with pedigree 0.33136, pedigree (1,1,5,5,4)
  (same comment as for Aluminium III)
- Silicon [water, surface water]: 6.27456e-5 kg; lognormal variance with pedigree 0.880073, pedigree (1,1,5,5,4)
  (same comment as for Aluminium III)
- Sodium I [water, ground-, long-term]: 0.00139938 kg; lognormal variance with pedigree 0.641283, pedigree (1,1,5,5,4)
  (same comment as for Aluminium III)
- Sodium I [water, surface water]: 0.000840625 kg; lognormal variance with pedigree 0.66174, pedigree (1,1,5,5,4)
  (same comment as for Aluminium III)
- Strontium [water, ground-, long-term]: 2.41841e-5 kg; lognormal variance with pedigree 1.35575, pedigree (1,1,5,5,4)
  (same comment as for Aluminium III)
- Strontium [water, surface water]: 4.03741e-8 kg; lognormal variance with pedigree 1.81616, pedigree (1,1,5,5,4)
  (same comment as for Aluminium III)
- Sulfate [water, ground-, long-term]: 0.0184523 kg; lognormal variance with pedigree 0.4953, pedigree (1,1,5,5,4)
  (same comment as for Aluminium III)
- Sulfate [water, surface water]: 0.00221765 kg; lognormal variance with pedigree 0.608559, pedigree (1,1,5,5,4)
  (same comment as for Aluminium III)
- TOC, Total Organic Carbon [water, ground-, long-term]: 0.133774 kg; lognormal variance with pedigree 0.192485, pedigree (1,1,5,5,4)
  (same comment as for Aluminium III)
- TOC, Total Organic Carbon [water, surface water]: 0.000223329 kg; lognormal variance with pedigree 0.787896, pedigree (1,1,5,5,4)
  (same comment as for Aluminium III)
- Tin ion [water, ground-, long-term]: 1.09337e-7 kg; lognormal variance with pedigree 5.3547, pedigree (1,1,5,5,4)
  (same comment as for Aluminium III)
- Tin ion [water, surface water]: 1.82533e-10 kg; lognormal variance with pedigree 2.53036, pedigree (1,1,5,5,4)
  (same comment as for Aluminium III)
- Titanium ion [water, ground-, long-term]: 0.000332475 kg; lognormal variance with pedigree 1.09355, pedigree (1,1,5,5,4)
  (same comment as for Aluminium III)
- Titanium ion [water, surface water]: 5.55049e-7 kg; lognormal variance with pedigree 1.46925, pedigree (1,1,5,5,4)
  (same comment as for Aluminium III)
- Vanadium V [water, ground-, long-term]: 0.00106837 kg; lognormal variance with pedigree 0.714035, pedigree (1,1,5,5,4)
  (same comment as for Aluminium III)
- Vanadium V [water, surface water]: 3.41134e-6 kg; lognormal variance with pedigree 1.23442, pedigree (1,1,5,5,4)
  (same comment as for Aluminium III)
- Zinc II [water, ground-, long-term]: 0.000125011 kg; lognormal variance with pedigree 5.29086, pedigree (1,1,5,5,4)
  (same comment as for Aluminium III)
- Zinc II [water, surface water]: 2.087e-7 kg; lognormal variance with pedigree 1.61254, pedigree (1,1,5,5,4)
  (same comment as for Aluminium III)

## Sampling procedure
For more details about sampling procedures, refer to: Turner, D. & Symeonidis, A. (2020). Life cycle inventories of the treatment of iron and steelmaking by-products, ecoinvent association, Zürich, Switzerland.
