# treatment of sewage sludge, 70% water, WWT, WW from medium density board production, municipal incineration

Dataset: EcoSpold 2, unit process
Geography: RoW
Time period: 2006-01-01 to 2022-12-31
Technology level: current
Classification: ISIC rev.4 ecoinvent: 3821:Treatment and disposal of non-hazardous waste
Scenario: Business-as-Usual
System model: Allocation at the point of substitution
Generated by: Nikolia Stoikou
Database: ecoinvent
isCopyrightProtected: true

## General comment
The process represents the treatment of a waste (sewage sludge) that is exclusively produced from another waste treatment. Municipal incineration is the controlled combustion of a waste. Sewage sludge is generated in the wastewater treatment of 'wastewater from medium density board production'. Recommended use of this dataset: to be used within the specific chain of treatments for 'wastewater from medium density board production'. Share of biogenic carbon in the sludge: 98.779%.

## Included activities start
The activity starts with the waste being available at the gate of the treatment facility. Collection and transportation of the waste to the treatment plant is not included.

## Included activities end
The activity ends with the waste being treated and waste-specific emissions from the incineration process are released to the environment (air and water).

## Geography
Modelling parameters affecting the treatment technology are not specific to this geography.

## Technology
The waste is treated in the incineration plant with flue gas cleaning. Incineration is the controlled combustion of a waste. Auxiliary material consumption for this step of air pollution control (APC) are included in the process. Infrastructure is also included in the process. Air polution control includes, electrostatic precipitator for fly ash (ESP), wet flue gas scrubber and 25% SNCR , 42.77% SCR-high dust , 32.68% SCR-low dust -DeNOx facilities and 0% without DeNOx (weighted according to mass of burnt waste). Efficiency of iron scrap separation from slag : 58%. Efficiency of aluminium scrap separation from slag : 31%. Efficiency of copper scrap separation from slag : 31%. Gross electric efficiency technology mix 15.84% and Gross thermal efficiency technology mix 28.51%

## Reference product
- heat, for reuse in municipal waste incineration only: 1 MJ; By-product classification allocatable product; CPC 17300: Steam and hot water; lognormal variance with pedigree 0.14327, pedigree (1,1,1,1,1)
  net useful heat generated from this waste and used in internal MSWI plant energy redistribution.
  Uncertainty: uncertainty is calculated from uncertainties in waste composition and uncertainties in energy efficiency and the uncertainty in internal energy demand
  production volume 2.22654e6 MJ
    Calculated from the production volume of the reference product in proportion to the respective output amounts.
  property price 0.0106 EUR2005
    Average European district heat price from Ecoheatcool and Euroheat 2005-2006, Ecoheat Work package 1: The European heat market. Final report. 10.6 EUR/GJ i s the price of district heat. http://www.solarthermalworld.org/files/Ecoheatcool%20WP1%20Web.pdf?download
  properties: carbon allocation 0 kg, carbon content 0

## Inputs from technosphere
- aluminium sulfate, powder: 9.53954e-7 kg
- biowaste: -3.77816e-5 kg
- chemical, organic: 3.74469e-5 kg
- diesel, burned in building machine: 0.00148951 MJ
- dust collector, electrostatic precipitator, for industrial use: 2.33125e-10 unit
- electricity, medium voltage: 0.00210714, 0.000657495, 1.95802e-5, 9.99061e-5, 0.00603257, 0.000329973 kWh (6 suppliers, which the file names only by identifier); sum of these 0.00924666 kWh
- furnace, wood chips, softwood storage area, 1000kW: 1.16495e-9 unit
- furnace, wood chips, with silo, 5000kW: 4.92351e-9 unit
- hazardous waste, for incineration: -3.32288e-5 kg
- heat, district or industrial, natural gas: 0.0449084 MJ
- heat, district or industrial, other than natural gas: 0.00105995, 0.000645533 MJ (2 suppliers, which the file names only by identifier); sum of these 0.00170548 MJ
- lubricating oil: 5.48523e-6 kg
- melamine formaldehyde resin: 0.00175728 kg
- paraffin: 0.000197485 kg
- pulpwood, hardwood, measured as solid wood under bark: 3.11606e-7 m3
- pulpwood, softwood, measured as solid wood under bark: 2.61224e-5 m3
- sawdust, wet, measured as dry mass: 2.51073e-5, 0.00123093 kg (2 suppliers, which the file names only by identifier); sum of these 0.00125604 kg
- slab and siding, softwood, wet, measured as dry mass: 8.74957e-5, 0.000339273 kg (2 suppliers, which the file names only by identifier); sum of these 0.000426769 kg
- tap water: 2.25e-5, 0.000937655, 3.71849e-5, 6.93851e-5, 0.0107301, 2.43929e-5, 0.000186918 kg (7 suppliers, which the file names only by identifier); sum of these 0.0120081 kg
- urea: 1.48377e-5, 1.87656e-6, 1.26704e-5 kg (3 suppliers, which the file names only by identifier); sum of these 2.93846e-5 kg
- urea formaldehyde resin: 0.00194975 kg
- wastewater from medium density board production: -1.70289e-5 m3
- wood ash mixture, pure: -8.38909e-5 kg
- wood chips, dry, measured as dry mass: 0.0153766 kg
- wood chips, from post-consumer wood, measured as dry mass: 0.00464425 kg
- wood chips, wet, measured as dry mass: 5.47651e-8, 2.41706e-5 kg (2 suppliers, which the file names only by identifier); sum of these 2.42254e-5 kg
- wooden board factory, organic bonded boards: 1.59391e-12 unit

## Inputs from nature
- Water, cooling, unspecified natural origin [natural resource, in water]: 1.20081e-5 m3
- Water, river [natural resource, in water]: 1.35143e-5 m3
- Water, well, in ground [natural resource, in water]: 1.17571e-8 m3

## Emissions to nature
- Acetaldehyde [air, urban air close to ground]: 2.51437e-8 kg
- Ammonia [air, urban air close to ground]: 3.04897e-7 kg
- Arsenic ion [air, urban air close to ground]: 1.76241e-10 kg
- Benzene [air, urban air close to ground]: 1.6038e-7 kg
- Benzene, ethyl- [air, urban air close to ground]: 5.28724e-9 kg
- Benzene, hexachloro- [air, urban air close to ground]: 1.26894e-15 kg
- Benzo(a)pyrene [air, urban air close to ground]: 8.81206e-11 kg
- Bromine [air, urban air close to ground]: 1.05745e-8 kg
- Cadmium II [air, urban air close to ground]: 1.23369e-10 kg
- Calcium [air, urban air close to ground]: 1.03101e-6 kg
- Carbon dioxide, non-fossil [air, urban air close to ground]: 0.0179766 kg
- Carbon monoxide, non-fossil [air, urban air close to ground]: 3.52483e-5 kg
- Chlorine [air, urban air close to ground]: 3.17234e-8 kg
- Chromium III [air, urban air close to ground]: 6.97916e-10 kg
- Chromium VI [air, urban air close to ground]: 7.04965e-12 kg
- Copper ion [air, urban air close to ground]: 3.87731e-9 kg
- Dinitrogen monoxide [air, urban air close to ground]: 4.05355e-7 kg
- Dioxins, measured as 2,3,7,8-tetrachlorodibenzo-p-dioxin [air, urban air close to ground]: 5.28724e-15 kg
- Fluorine [air, urban air close to ground]: 8.81206e-9 kg
- Formaldehyde [air, urban air close to ground]: 5.79684e-6 kg
- Hydrocarbons, aliphatic, alkanes, unspecified [air, urban air close to ground]: 1.6038e-7 kg
- Hydrocarbons, aliphatic, unsaturated [air, urban air close to ground]: 5.46348e-7 kg
- Lead II [air, urban air close to ground]: 4.40603e-9 kg
- Magnesium [air, urban air close to ground]: 6.34469e-8 kg
- Manganese II [air, urban air close to ground]: 2.9961e-8 kg
- Mercury II [air, urban air close to ground]: 5.28724e-11 kg
- Methane, non-fossil [air, urban air close to ground]: 2.64362e-7 kg
- Methanol [air, non-urban air or from high stacks]: 7.53121e-7 kg
- NMVOC, non-methane volatile organic compounds [air, urban air close to ground]: 1.65435e-5 kg
- Nickel II [air, urban air close to ground]: 1.05745e-9 kg
- Nitrogen oxides [air, urban air close to ground]: 2.1149e-5 kg
- PAH, polycyclic aromatic hydrocarbons [air, urban air close to ground]: 1.95628e-9 kg
- Particulate Matter, < 2.5 um [air, urban air close to ground]: 4.40603e-7 kg
- Particulate Matter, > 10 um [air, unspecified]: 3.35557e-6 kg
- Phenol, pentachloro- [air, urban air close to ground]: 1.42755e-12 kg
- Phosphorus [air, urban air close to ground]: 5.28724e-8 kg
- Potassium I [air, urban air close to ground]: 4.12405e-6 kg
- Sodium [air, urban air close to ground]: 2.29114e-7 kg
- Sulfur dioxide [air, urban air close to ground]: 4.40603e-7 kg
- Toluene [air, urban air close to ground]: 5.28724e-8 kg
- Zinc II [air, urban air close to ground]: 5.28724e-8 kg
- m-Xylene [air, urban air close to ground]: 2.1149e-8 kg

## Extrapolations
Modelling parameters are based on an average municipal solid waste incineration plant in Switzerland for the year of 2010 (grate incinerators).
