# treatment of coal gas, in power plant

Dataset: EcoSpold 2, unit process
Geography: SK
Time period: 1990-01-01 to 2022-12-31
Technology level: current
Classification: EcoSpold01Categories: natural gas/power plants
Classification: ISIC rev.4 ecoinvent: 3510:Electric power generation, transmission and distribution
Synonyms: coke oven gas
Tags: fossil fuels; industrial gas power
Scenario: Business-as-Usual
System model: Allocation at the point of substitution
Generated by: Karin Treyer
Published in: Faist Emmenegger, M. 2007
Database: ecoinvent
isCopyrightProtected: true

## General comment
Activity represents electricity production from coal gas treatment in power plants. Based on European data.
This dataset represents the treatment of coke oven gas (coal gas) in an unspecified gas power plant with high voltage electricity and heat as by-product in Turkey in 2012.
According to IEA (2008), coke oven gas is obtained as a by-product of solid fuel carbonisation and gasification operations carried out by coke producers and iron and steel plants not connected with gas works and municipal gas plants.
The efficiency calculations are based on IEA/OECD statistics (fuel inputs, electricity produced). No exergy correction could be made due to incomplete data (see ecoinvent report "Erdgas" p. 128 for details).
Water is used for wet cooling and as feed water in the steam circuit. In this dataset, 100% wet cooling and no once-through cooling is assumed.
EMISSIONS:
Emission data have partly been overtaken from a dataset representing the production of electricity in a natural gas power plant. Data have partly been adapted to the different composition of natural gas and coal gas (see tab. 11.16 in ecoinvent report "Erdgas").
Different sources served as basis for assumption of average emissions. Where possible, the most recent sources were taken into account, whereas older sources were taken in order to determine the remaining data gaps. The emissions have been fixed for the former UCTE region* and have been overtaken as such for all countries without value adaptation (adaptation of the uncertainty). See ecoinvent report "Erdgas" given as main source for details (Tab. 11.15 and tab. 11.17). In the following a short overview:
- Emissions of NOx, CO, CO2, SO2, particles, N2O and CH4 are mainly taken from CORINAIR 2001, Rentz et al. 2002, and Swedish EPA 2000 (see tab. 11.17) and are basically valid for European countries.
- NOx emissions are a major challenge in natural gas power plants. With rising temperature, emissions also rise; band widths of NOx emissions in literature are correspondingly large. There are several methods to diminish these emissions.
- CO is a result of incomplete burning. For economic and technical reasons, plant combustion is optimized and CO emissions are low.
- CO2 and SO2 emissions are depending on the composition of the used fuel.
Coal gas can have very different sulfur contents and is washed out. Efficiency of sulfur removal is assumed to reach 90%.
- Organic compound emissions are estimated on the basis of EPA 1998.
- Particles are assumed to be smaller than 2.5 micro-m
Sources:
EMEP/CORINAIR 2001: Joint EMEP/CORINAIR Atmospheric Emission Inventory Guidebook, Third Edition. Copenhagen: European Environment Agency, 2001. http://reports.eea.eu.int/technical_report_2001_3/en.
Rentz O., Karl U., Peter H. (2002). Ermittlung und Evaluierung von Emissionsfaktoren für Feuerungsanlagen in Deutschland für die Jahre 1995, 2000 und 2010. Deutsch- Französisches Institut für Umweltforschung, Uni Karsruhe. Endbericht. Im Auftrag des Umweltbundesamtes. Forschungsbericht 299 43 142. Umweltbundesamt. Berlin.
Swedish EPA (2000) Emission Factors. Swedish Environmental Protection Agency.
IEA/OECD. 2008. Coal information 2008. International Energy Agency (IEA), Paris Cedex (FR)
*former UCTE: Union for the Coordination of the Transmission of Electricity, since 2009 replaced by ENTSO-E European Network of Transmission System Operators for Electricity.

## Included activities start
From the coal gas ready to be treated in a gas power plant and from the gas power plant ready to produce electricity.

## Included activities end
This treatment activity ends with 1MJ of coal gas treated in a power plant.

This dataset includes:
- the emissions from burning
- all operation and maintenance activities and materials of the power plants.
- Cooling: It is a assumed that all plants use wet cooling with a cooling tower. No cooling tower is included in this dataset (will be implemented in future versions)

This dataset doesn"t include
- raw materials extraction, decommissioning and waste treatment as these activities are already included in the infrastructure datasets.
- transformation of the by-product electricity.

## Technology
A natural gas power plant with a capacity of 100 MW is taken as power plant infrastructure.

## Time period
The annual production volume is valid for the year 2012.

## Parameters
- electrical efficiency, country: 0.3 dimensionless; name efficiency_electrical_country; lognormal variance with pedigree 0.0167, pedigree (4,2,1,1,3)
  Literature value/calculated value. Net electrical efficiency based on the lower heating value (LHV).
  For all OECD countries, the IEA Energy statistics of OECD countries 2014 provides data for the year 2012 on fuel input (TJ, Net calorific value NCV) in CHP plants and electricity plants and gross electricity production (GWh) for each country. Together with the information on own use, the net electrical efficiency based on the NCV is calculated. From the statistics, electricity from coke oven gas is modelled in the dataset "treatment of coal gas", while electricity from "recovered gas (including blast furnace gas and other recovered gas) and gas works gas is modelled with the dataset "treatment of blast furnace gas".
  For all non-OECD countries, data from the IEA Energy statistics of non-OECD countries 2014 and the IEA electricity information have been used. The energy statistics source provides data on fuel input from coke oven gas (coal gas) as well as recovered gases and gas works gas (modelled as blast furnace gas). The electricity information provides information on total electricity production with "gases" (=gas works gas, coke oven gas, blast furnace gas and other recovered gases). This electricity production is allocated to the coal gas and blast furnace gas dataset in ecoinvent based on the fuel input. It cannot be differentiated between electricity only and CHP plants as total values only are given.
  IEA. 2014. Electricity Information 2014. ISBN 978-92-64-21692-1. International Energy Agency (IEA), Paris Cedex (FR).
  IEA/OECD. 2014. Energy statistics of non-OECD countries 2014. International Energy Agency (IEA), Paris Cedex (FR).
  IEA/OECD. 2014. Energy statistics of OECD countries 2014. International Energy Agency (IEA), Paris Cedex (FR).
  The original value calculated by the statistics was 0.591, which seems to be unrealistic. A value of 0.3 is therefore being used (own assumption).
- electrical efficiency, global: 0.302 dimensionless; name efficiency_electrical_global; lognormal variance with pedigree 0.0167, pedigree (4,2,1,1,3)
  Literature value/calculated value. Net electrical efficiency based on the lower heating value (LHV).
  For all OECD countries, the IEA Energy statistics of OECD countries 2014 provides data for the year 2012 on fuel input (TJ, Net calorific value NCV) in CHP plants and electricity plants and gross electricity production (GWh) for each country. Together with the information on own use, the net electrical efficiency based on the NCV is calculated. From the statistics, electricity from coke oven gas is modelled in the dataset "treatment of coal gas", while electricity from "recovered gas (including blast furnace gas and other recovered gas) and gas works gas is modelled with the dataset "treatment of blast furnace gas".
  For all non-OECD countries, data from the IEA Energy statistics of non-OECD countries 2014 and the IEA electricity information have been used. The energy statistics source provides data on fuel input from coke oven gas (coal gas) as well as recovered gases and gas works gas (modelled as blast furnace gas). The electricity information provides information on total electricity production with "gases" (=gas works gas, coke oven gas, blast furnace gas and other recovered gases). This electricity production is allocated to the coal gas and blast furnace gas dataset in ecoinvent based on the fuel input. It cannot be differentiated between electricity only and CHP plants as total values only are given.
  IEA. 2014. Electricity Information 2014. ISBN 978-92-64-21692-1. International Energy Agency (IEA), Paris Cedex (FR).
  IEA/OECD. 2014. Energy statistics of non-OECD countries 2014. International Energy Agency (IEA), Paris Cedex (FR).
  IEA/OECD. 2014. Energy statistics of OECD countries 2014. International Energy Agency (IEA), Paris Cedex (FR).
- fraction, cooling water, to air: 0.0118019 dimensionless; name fraction_CW_to_air; lognormal variance with pedigree 0.04, pedigree (1,1,1,1,1)
- relation between the global and the country's efficiency: 1.00667 dimensionless; name relation_global_country; = efficiency_electrical_global/ efficiency_electrical_country
  This factor brings the amounts of the exchanges in the global dataset into relation with the amounts in the country datasets.
- thermal efficiency: 0.145 dimensionless; name efficiency_thermal; lognormal variance with pedigree 0.0118, pedigree (2,3,1,5,3)
  Literature value/calculation for the thermal efficiency. IEA/OECD statistics provided data for OECD countries in total: Fuel input in CHP plants and the electricity and heat output. Not enough detailed data were available for non-OECD countries and/or the whole world, so that for this global dataset, the OECD value was overtaken. Data are for the category "coal manufactured gases" including coke oven gas, blast furnace gas and oxygen steel furnace gas. Fuel input data in the statistics are expressed in gross calorific values. Net calorific values are calculated according to IEA/OECD p. I.7 by multiplying the gross heat content with a factor 0.9, taking therefore the lower factor for coke oven gas, corresponding to a worst case scenario (blast furnace gas and oxygen steel furnace gas have a gross to net ratio of 1).
  IEA/OECD. 2010. Electricity Information 2010. International Energy Agency (IEA), Paris Cedex (FR). Part IV. Detailed OECD Electricity And Heat Data.
  nan

## Reference product
- electricity, high voltage: 1 kWh; name electricity; = coal_gas*efficiency_electrical_global*(-1)/3.6; source IEA/OECD 2010, p. II.8ff; By-product classification allocatable product; CPC 17100: Electrical energy
  Calculated value. 1kWh = 3.6 MJ
  production volume 1.53e8 kWh
    Literature value/calculated value. Net electricity production in 2012.
    For all OECD countries, the IEA Energy statistics of OECD countries 2014 provides data for the year 2012 on gross electricity production (GWh) for each country. Together with the information on own use, the net electrical efficiency based on the NCV is calculated. From the statistics, electricity from coke oven gas is modelled in the dataset "treatment of coal gas", while electricity from "recovered gas (including blast furnace gas and other recovered gas) and gas works gas is modelled with the dataset "treatment of blast furnace gas".
    For all non-OECD countries, data from the IEA Energy statistics of non-OECD countries 2014 and the IEA electricity information have been used. The energy statistics source provides data on fuel input from coke oven gas (coal gas) as well as recovered gases and gas works gas (modelled as blast furnace gas). The electricity information provides information on total electricity production with "gases" (=gas works gas, coke oven gas, blast furnace gas and other recovered gases). This electricity production is allocated to the coal gas and blast furnace gas dataset in ecoinvent based on the fuel input. It cannot be differentiated between electricity only and CHP plants as total values only are given.
    IEA. 2014. Electricity Information 2014. ISBN 978-92-64-21692-1. International Energy Agency (IEA), Paris Cedex (FR).
    IEA/OECD. 2014. Energy statistics of non-OECD countries 2014. International Energy Agency (IEA), Paris Cedex (FR).
    IEA/OECD. 2014. Energy statistics of OECD countries 2014. International Energy Agency (IEA), Paris Cedex (FR).
  property exergy 3.6 MJ; name electricity_exergy
    This exergy property is based on the exergy content of the product.
  property price 0.0977 EUR2005
    Temporary price data. Calculated as 90% of purchasers price based on: 94% of the average price (to account for a 6% loss in transformation and transmission) for electricity for industrial consumersin 2005 (excluded taxes). From IEA.
  property true value relation 3.6; name electricity_true_value_relation
    property to calculate "true value" from
  properties: carbon allocation 0 kg, carbon content 0

## Inputs from technosphere
- coal gas: -2.19359 MJ
- coal tar: -0.0160262 kg
- electricity, medium voltage: 4.79623e-5, 0.000134987, 1.29037e-5, 3.59469e-6, 4.38583e-5, 0.00471505, 6.08992e-6, 0.000231845, 0.00147125, 0.000290667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 kWh (46 suppliers, which the file names only by identifier); sum of these 0.0244901 kWh
- hard coal: 0.0722195, 0.0958269, 0.0434512, 0.307515, 0.044341, 0.0338306, 0.0647807, 0.0188565, 0.0103107 kg (9 suppliers, which the file names only by identifier); sum of these 0.691132 kg
- hard coal coke factory: 8.51394e-12 unit
- iron sulfate: 3.65599e-5 kg
- phosphoric acid, fertiliser grade, without water, in 70% solution state: 7.31197e-5 kg
- sodium hydroxide, without water, in 50% solution state: 0.00102167 kg
- water, decarbonised: 0.274092, 0.0365236, 0.00725175, 2.2841e-5, 0.00179308, 0.0238452, 0.232668, 0.147308, 0.0436959, 0.0187583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 kg (12 suppliers, which the file names only by identifier); sum of these 0.801312 kg

## Emissions to nature
- Acetone [air, non-urban air or from high stacks]: 2.11847e-5 kg
- Acrolein [air, non-urban air or from high stacks]: 2.61428e-8 kg
- Ammonia [air, non-urban air or from high stacks]: 3.07003e-6 kg
- Antimony ion [air, non-urban air or from high stacks]: 3.6009e-10 kg
- Arsenic ion [air, non-urban air or from high stacks]: 9.86616e-9 kg
- Barium II [air, non-urban air or from high stacks]: 1.12184e-8 kg
- Benzene [air, non-urban air or from high stacks]: 0.000540886 kg
- Benzo(a)pyrene [air, non-urban air or from high stacks]: 3.91141e-6 kg
- Beryllium II [air, non-urban air or from high stacks]: 1.79794e-10 kg
- Cadmium II [air, non-urban air or from high stacks]: 1.48744e-10 kg
- Carbon dioxide, fossil [air, non-urban air or from high stacks]: 0.0801312 kg
- Carbon disulfide [air, non-urban air or from high stacks]: 4.67766e-7 kg
- Carbon monoxide, fossil [air, non-urban air or from high stacks]: 0.00851394 kg
- Chromium III [air, non-urban air or from high stacks]: 4.75278e-9 kg
- Cobalt II [air, non-urban air or from high stacks]: 1.36223e-9 kg
- Copper ion [air, non-urban air or from high stacks]: 5.90968e-9 kg
- Cyanide [air, non-urban air or from high stacks]: 1.64269e-6 kg
- Ethane [air, non-urban air or from high stacks]: 0.000143235 kg
- Ethanol [air, non-urban air or from high stacks]: 2.1385e-8 kg
- Lead II [air, non-urban air or from high stacks]: 1.51749e-8 kg
- Manganese II [air, non-urban air or from high stacks]: 8.26353e-9 kg
- Mercury II [air, non-urban air or from high stacks]: 1.80295e-10 kg
- Methane, chlorodifluoro-, HCFC-22 [air, non-urban air or from high stacks]: 1.63768e-6 kg
- Methane, fossil [air, non-urban air or from high stacks]: 0.00131716 kg
- Methanol [air, non-urban air or from high stacks]: 2.1385e-6 kg
- NMVOC, non-methane volatile organic compounds [air, non-urban air or from high stacks]: 0.00525861 kg
- Nickel II [air, non-urban air or from high stacks]: 1.07176e-8 kg
- Nitrogen oxides [air, non-urban air or from high stacks]: 0.000424195 kg
- PAH, polycyclic aromatic hydrocarbons [air, non-urban air or from high stacks]: 1.14688e-6 kg
- Particulate Matter, < 2.5 um [air, non-urban air or from high stacks]: 0.00123703 kg
- Particulate Matter, > 10 um [air, non-urban air or from high stacks]: 0.00208341 kg
- Particulate Matter, > 2.5 um and < 10um [air, non-urban air or from high stacks]: 0.000565927 kg
- Phenol, pentachloro- [air, non-urban air or from high stacks]: 1.72282e-6 kg
- Phosphorus [air, non-urban air or from high stacks]: 2.30377e-8 kg
- Propane [air, non-urban air or from high stacks]: 1.43235e-6 kg
- Selenium IV [air, non-urban air or from high stacks]: 3.29039e-9 kg
- Silver I [air, non-urban air or from high stacks]: 6.51066e-11 kg
- Styrene [air, non-urban air or from high stacks]: 2.19359e-8 kg
- Sulfur dioxide [air, non-urban air or from high stacks]: 0.000811329 kg
- Thallium I [air, non-urban air or from high stacks]: 7.61247e-10 kg
- Toluene [air, non-urban air or from high stacks]: 1.69778e-6 kg
- Water [air, unspecified]: 0.000310509 m3
- Zinc II [air, non-urban air or from high stacks]: 3.01494e-8 kg
- Ammonium [water, surface water]: 9.11493e-6 kg
- Chloride [water, surface water]: 0.000711165 kg
- Hydrogen sulfide [water, surface water]: 1.46239e-6 kg
- PAH, polycyclic aromatic hydrocarbons [water, surface water]: 1.0968e-8 kg
- Sodium I [water, surface water]: 0.000457249 kg
- Solids, inorganic [water, surface water]: 0.000402159 kg
- Water [water, unspecified]: 0.000490804 m3

## Sampling procedure
Literature and statistics

## Extrapolations
Emission data partly taken over from natural gas power plants.
Emission data partly from old references.
A natural gas power plant is taken as infrastructure input.
