# ethanol fermentation plant construction

Dataset: EcoSpold 2, unit process
Geography: CH
Time period: 1997-01-01 to 2022-12-31
Technology level: current
Classification: ISIC rev.4 ecoinvent: 4290:Construction of other civil engineering projects
Classification: EcoSpold01Categories: biomass/fuels
Tags: ConvertedDataset
Scenario: Business-as-Usual
System model: Allocation at the point of substitution
Share of production covered: 0 %
Generated by: Niels Jungbluth
Published in: Jungbluth N. 2007
Database: ecoinvent
isCopyrightProtected: true

## General comment
Ethanol plant with an annual capacity of 90 000 tons ethanol and a life time of 20 years .
[This dataset was already contained in the ecoinvent database version 2. It was not individually updated during the transfer to ecoinvent version 3. Life Cycle Impact Assessment results may still have changed, as they are affected by changes in the supply chain, i.e. in other datasets. This dataset was generated following the ecoinvent quality guidelines for version 2. It may have been subject to central changes described in the ecoinvent version 3 change report (http://www.ecoinvent.org/database/ecoinvent-version-3/reports-of-changes/), and the results of the central updates were reviewed extensively. The changes added e.g. consistent water flows and other information throughout the database. The documentation of this dataset can be found in the ecoinvent reports of version 2, which are still available via the ecoinvent website. The change report linked above covers all central changes that were made during the conversion process.]

## Included activities end
Ethanol plant infrastructure including transformation and occupation of land, materials, energy uses, emissions, and dismanteling

## Geography
The inventory is modelled with data from a plant in the USA.

## Technology
Ethanol fermentation plant with wheat as resource.

## Time period
Literature

## Reference product
- ethanol fermentation plant: 1 unit; By-product classification allocatable product; CPC 53269: Other constructions for manufacturing
  EcoSpold01Location=CH
  production volume 0.0336675 unit
    This is a placeholder value that does not reflect real-world production volumes. This dataset does not currently require a real-world production volume to work in the database framework, and no actual data were collected yet. This has no negative effect on the results of the ecoinvent database. The placeholder value of this activity was scaled according to the nominal GDP of 2005 (source: United Nations, http://data.un.org/Glossary.aspx?q=GDP+%28current+US%24%29, accessed 20130726) to reflect an appropriate share of the global production volume, which is also a placeholder value.
  property price 3.30592e7 EUR2005
    Convert from EU 27 price to the world by currency exchange rate.
  properties: carbon allocation 0 kg, carbon content 0

## Inputs from technosphere
- concrete, 30MPa: 12409 m3; lognormal variance with pedigree 0.0501, pedigree (1,1,5,3,1)
  EcoSpold01Location=CH
  Literature 2002
  Uncertainty: Literature 2002
  properties: dry mass 2205 kg, water content 0.0816327, wet mass 2385 kg
- copper, cathode: 36000 kg; lognormal variance with pedigree 0.1786, pedigree (4,5,5,5,5)
  EcoSpold01Location=RER
  Estimation
  Uncertainty: Estimation
  properties: dry mass 1 kg, wet mass 1 kg
- diesel, burned in building machine: 122000 MJ; lognormal variance with pedigree 0.1786, pedigree (4,5,5,5,5)
  Estimation
  EcoSpold01Location=GLO
  Uncertainty: Estimation
  properties: heating value, net 1 MJ
- electricity, medium voltage: 14778 kWh; lognormal variance with pedigree 0.1786, pedigree (4,5,5,5,5)
  Estimation
  EcoSpold01Location=CH
  Uncertainty: Estimation
- nickel, class 1: 3200 kg; lognormal variance with pedigree 0.1786, pedigree (4,5,5,5,5)
  EcoSpold01Location=GLO
  Estimation
  Uncertainty: Estimation
  properties: dry mass 1 kg, wet mass 1 kg
- steel, chromium steel 18/8, hot rolled: 145000 kg; lognormal variance with pedigree 0.1786, pedigree (4,5,5,5,5)
  Estimation
  EcoSpold01Location=RER
  Uncertainty: Estimation
  properties: carbon content, fossil 0.0008, dry mass 1 kg, wet mass 1 kg
  note on carbon content, fossil: Stainless steel model is the grade 304 steel (18/8 stainless, 18% chromium 8% nickel; max. 0.08% C)
- steel, low-alloyed, hot rolled: 167000 kg; lognormal variance with pedigree 0.1786, pedigree (4,5,5,5,5)
  EcoSpold01Location=RER
  Estimation
  Uncertainty: Estimation
  properties: carbon content, fossil 0.005, dry mass 1 kg, wet mass 1 kg
  note on carbon content, fossil: Low alloyed steel composition given in Tab. 3.2 ecoinvent v2.2 report 10_partII. Steel assumed to have a C content of 0.5%
- steel, unalloyed: 394700 kg; lognormal variance with pedigree 0.0501, pedigree (1,1,5,3,1)
  EcoSpold01Location=RER
  Literature 2002
  Uncertainty: Literature 2002
  properties: carbon content, fossil 0.0025, dry mass 1 kg, wet mass 1 kg
  note on carbon content, fossil: Unalloyed steels or carbon steels are those in which the level of an individual element in no case reaches or exceeds the limiting concentration given in Tab. 3.1 ecoinvent v2.2 report 10_partII. Assumed to have a C content of 0.25%
- waste concrete, not reinforced: -2.73e7 kg; lognormal variance with pedigree 0.1786, pedigree (4,5,5,5,5)
  EcoSpold01Location=CH
  Estimation
  Uncertainty: Estimation
  production volume
    Calculated from the production volume of ethanol fermentation plant in proportion to the respective output amounts.
  properties: dry mass 1 kg, wet mass 1 kg
- zinc: 86000 kg; lognormal variance with pedigree 0.1786, pedigree (4,5,5,5,5)
  EcoSpold01Location=RER
  Estimation
  Uncertainty: Estimation
  properties: dry mass 1 kg, wet mass 1 kg

## Inputs from nature
- Occupation, construction site [natural resource, land]: 187500 m2*year; lognormal variance with pedigree 0.0901, pedigree (1,1,5,3,1)
  Literature 2005
  Uncertainty: Literature 2005
- Occupation, industrial area [natural resource, land]: 750000 m2*year; lognormal variance with pedigree 0.0901, pedigree (1,1,5,3,1)
  Literature 2005
  Uncertainty: Literature 2005
- Transformation, from unspecified [natural resource, land]: 37500 m2; lognormal variance with pedigree 0.1701, pedigree (1,1,5,3,1)
  Literature 2005
  Uncertainty: Literature 2005
- Transformation, to industrial area [natural resource, land]: 37500 m2; lognormal variance with pedigree 0.1701, pedigree (1,1,5,3,1)
  Literature 2005
  Uncertainty: Literature 2005

## Sampling procedure
Literature data

## Extrapolations
Some data are derived from other or unknown plants or have been estimated.

## Review by Niels Jungbluth 2005-12-19
Passed.
