# anaerobic digestion plant construction, agriculture, with methane recovery

Dataset: EcoSpold 2, unit process
Geography: CH
Time period: 2004-01-01 to 2022-12-31
Technology level: current
Classification: EcoSpold01Categories: biomass/fuels
Classification: ISIC rev.4 ecoinvent: 4290:Construction of other civil engineering projects
Synonyms: agricultural co-fermentation plant
Tags: ConvertedDataset
Scenario: Business-as-Usual
System model: Allocation at the point of substitution
Share of production covered: 50 %
Generated by: Konrad Schleiss
Published in: Jungbluth N. 2007
Database: ecoinvent
isCopyrightProtected: true

## General comment
This dataset refers to a multioutput process and represents the production of the reference product "anaerobic digestion plant, agrcultural, with methane recovery" and five co-products: waste reinforced concrete, waste polyvinylchloride, waste wood, waste polystyrene, and waste plastic mixture. The inventory refers to a typical agricultural biogas plant with a dump of 90 m3, a fermenter with a capacity of 500m3 and a life time of 20 years.
[This dataset was already contained in the ecoinvent database version 2. It was not individually updated during the transfer to ecoinvent version 3. Life Cycle Impact Assessment results may still have changed, as they are affected by changes in the supply chain, i.e. in other datasets. This dataset was generated following the ecoinvent quality guidelines for version 2. It may have been subject to central changes described in the ecoinvent version 3 change report (http://www.ecoinvent.org/database/ecoinvent-version-3/reports-of-changes/), and the results of the central updates were reviewed extensively. The changes added e.g. consistent water flows and other information throughout the database. The documentation of this dataset can be found in the ecoinvent reports of version 2, which are still available via the ecoinvent website. The change report linked above covers all central changes that were made during the conversion process.]

## Included activities start
From the land transformation/occupation and the reception of the construction materials (concrete, synthetic rubber, glued laminated timber, polystyrene, copper, polyethylene, steel, and polyvinylidenchloride) at the construction place.

## Included activities end
This activity ends with an anaerobic digestion plant constructed.The dataset includes the production, transport and disposal of the main materials for an agricultural biogas plant.

## Geography
This process refers to an agricultural biogas plant with a capacity of about 500m3. The data were sampled from 20 different plants in Switzerland.

## Technology
To avoid Methane emissions the new plants in Switzerland are covered. The dataset is based on data from standard plant in Switzerland in the year 2006, a plant with methane recovery in the stock.
The average Swiss plant in the year 2006 was determined by evaluating 20 plants producing about 50% of the electricity from agricultural biogas plants. A typical Swiss plant has a concrete fermentation system and offers the possibility to treat co-substrates.
Compared to the data given for the plants without covering the following differences occur:
because of the larger volume the major material used, like concrete or reinforcing steel, are use in larger quantities; because of the coverage a bigger amount of rubber is used.
A schematic plant design is given below:

## Reference product
- anaerobic digestion plant, agriculture, with methane recovery: 1 unit; By-product classification allocatable product; CPC 53290: Other civil engineering works
  EcoSpold01Location=CH
  Average Swiss plant in the year 2006 with a concrete fermentation system and offering the possibility to treat co-substrates. The pit is 90 m3 and the fermenter (digestion
  facility) has a capacity of about 500 m3. The lifetime of the plant is assumed to be 20 years.
  production volume 0.0336675 unit
    This is a placeholder value that does not reflect real-world production volumes. This dataset does not currently require a real-world production volume to work in the database framework, and no actual data were collected yet. This has no negative effect on the results of the ecoinvent database. The placeholder value of this activity was scaled according to the nominal GDP of 2005 (source: United Nations, http://data.un.org/Glossary.aspx?q=GDP+%28current+US%24%29, accessed 20130726) to reflect an appropriate share of the global production volume, which is also a placeholder value.
  property price 490790 EUR2005
    Convert from EU 27 price to the world by currency exchange rate.
  properties: carbon allocation 0 kg, carbon content 0

## Inputs from technosphere
- copper, cathode: 250 kg; lognormal variance with pedigree 0.0407, pedigree (2,2,5,1,1)
  Calculated value. A plant with 500m3 concrete fermenter, average for Swiss agricultural biogas plants in the year 2006 has been used. Only the plants without the stock has been taken into account, Because the stock is needed for the manure anyway.
  EcoSpold01Location=RER
  Uncertainty: A plant with 500m3 concrete fermenter, average for Swiss agricultural biogas plants in the year 2006 has been used. Only the plants without the stock has been taken into account, Because the stock is needed for the manure anyway.
  properties: dry mass 1 kg, wet mass 1 kg
- glued laminated timber, MUF-glue: 40 m3; lognormal variance with pedigree 0.0407, pedigree (2,2,5,1,1)
  Calculated value. A plant with 500m3 concrete fermenter, average for Swiss agricultural biogas plants in the year 2006 has been used. Only the plants without the stock has been taken into account, Because the stock is needed for the manure anyway. The split between PUR-glue and MUF-glue glued laminated timber is made based on the Swiss relative production volumes for the products.
  EcoSpold01Location=RER
  Uncertainty: A plant with 500m3 concrete fermenter, average for Swiss agricultural biogas plants in the year 2006 has been used. Only the plants without the stock has been taken into account, Because the stock is needed for the manure anyway.
  properties: carbon content, fossil 0.01638, carbon content, non-fossil 0.442689, dry mass 403.64 kg, heating value, net 5517.96 MJ, price 298 EUR2005, water content 0.0975126, wet mass 443 kg
- glued laminated timber, PUR-glue: 40 m3; lognormal variance with pedigree 0.0407, pedigree (2,2,5,1,1)
  Calculated value. A plant with 500m3 concrete fermenter, average for Swiss agricultural biogas plants in the year 2006 has been used. Only the plants without the stock has been taken into account, because the stock is needed for the manure anyway. The split between PUR-glue and MUF-glue glued laminated timber is made based on the Swiss relative production volumes for the products.
  properties: carbon content, fossil 0.00801, carbon content, non-fossil 0.446904, dry mass 399.46 kg, heating value, net 5409.08 MJ, price 298 EUR2005, water content 0.0989836, wet mass 439 kg
- polyethylene, high density, granulate: 170 kg; lognormal variance with pedigree 0.0407, pedigree (2,2,5,1,1)
  EcoSpold01Location=RER
  Calculated value. A plant with 500m3 concrete fermenter, average for Swiss agricultural biogas plants in the year 2006 has been used. Only the plants without the stock has been taken into account, Because the stock is needed for the manure anyway.
  Uncertainty: A plant with 500m3 concrete fermenter, average for Swiss agricultural biogas plants in the year 2006 has been used. Only the plants without the stock has been taken into account, Because the stock is needed for the manure anyway.
  properties: carbon content, fossil 0.857143, dry mass 1 kg, heating value, net 42.47 MJ, wet mass 1 kg
  note on carbon content, fossil: Polyethylene is formed out of a huge amount of ethylene monomers (C2H4) (ecoinvent v2.2 report 11_II). MW=28 g/mol
- polystyrene, high impact: 570 kg; lognormal variance with pedigree 0.0407, pedigree (2,2,5,1,1)
  (same comment as for polyethylene, high density, granulate)
  properties: carbon content, fossil 0.923077, dry mass 1 kg, heating value, net 38.67 MJ, wet mass 1 kg
  note on carbon content, fossil: Chemical formula of polystyrene is (C8H8)n (ecoinvent v2.2 report 11_II)
- polyvinylidenchloride, granulate: 330 kg; lognormal variance with pedigree 0.0407, pedigree (2,2,5,1,1)
  (same comment as for polyethylene, high density, granulate)
  properties: carbon content, fossil 0.387097, dry mass 1 kg, heating value, net 10.01 MJ, wet mass 1 kg
  note on carbon content, fossil: Monomer is vynyl chloride, C2H3Cl (ecoinvent v2.2 report 11_II). MW=62 g/mol
- reinforcing steel: 10800 kg; lognormal variance with pedigree 0.0407, pedigree (2,2,5,1,1)
  (same comment as for polyethylene, high density, granulate)
  properties: carbon content, fossil 0.004, dry mass 1 kg, wet mass 1 kg
- steel, chromium steel 18/8: 1300 kg; lognormal variance with pedigree 0.0407, pedigree (2,2,5,1,1)
  (same comment as for polyethylene, high density, granulate)
  properties: carbon content, fossil 0.0008, dry mass 1 kg, wet mass 1 kg
  note on carbon content, fossil: Stainless steel model is the grade 304 steel (18/8 stainless, 18% chromium 8% nickel; max. 0.08% C)
- synthetic rubber: 1200 kg; lognormal variance with pedigree 0.0407, pedigree (2,2,5,1,1)
  EcoSpold01Location=RER
  Calculated value. Used for coverage. A plant with 500m3 concrete fermenter, average for Swiss agricultural biogas plants in the year 2006 has been used. Only the plants without the stock has been taken into account, Because the stock is needed for the manure anyway.
  Uncertainty: Used for coverage. A plant with 500m3 concrete fermenter, average for Swiss agricultural biogas plants in the year 2006 has been used. Only the plants without the stock has been taken into account, Because the stock is needed for the manure anyway.
  properties: carbon content, fossil 0.871949, dry mass 1 kg, heating value, net 26.42 MJ, wet mass 1 kg
  note on carbon content, fossil: EPDM (Ethylene-propene-diene terpolymer) rubber is a terpolymer of ethylene, propene, and a diene with the residual unsaturated portion of the diene in the side chain (ecoinvent v2.2 report 7-part XX & Ullmann). Chemical formula (deduced from Evidences of Solvent-Induced Miscibility in Polychloroprene-co-Ethylene-Propene Diene Terpolymer Blends, Dubey et al., Journal of Applied Polymer Science, 2009, 111:1884–1891): C20H35
- unreinforced concrete, 15MPa: 120 m3; lognormal variance with pedigree 0.0407, pedigree (2,2,5,1,1)
  EcoSpold01Location=CH
  Calculated value. A plant with 500m3 concrete fermenter, average for Swiss agricultural biogas plants in the year 2006 has been used. Only the plants without the stock has been taken into account, Because the stock is needed for the manure anyway.
  Uncertainty: A plant with 500m3 concrete fermenter, average for Swiss agricultural biogas plants in the year 2006 has been used. Only the plants without the stock has been taken into account, Because the stock is needed for the manure anyway.
  properties: dry mass 2190 kg, water content 0.086758, wet mass 2380 kg
- waste plastic, mixture: -1370 kg; lognormal variance with pedigree 0.0009, pedigree (2,2,2,1,1)
  EcoSpold01Location=CH
  Calculated value.
  According to Swiss law organic material has to be burned in incineration plants if no material reuse is possible.
  Uncertainty: According to Swiss law organic material has to be burned in incineration plants if no material reuse is possible.
  production volume
    Calculated from the production volume of anaerobic digestion plant, agriculture, with methane recovery in proportion to the respective output amounts.
  properties: carbon content, fossil 0.747344, dry mass 0.847 kg, heating value, net 30.79 MJ, water content 0.180638, wet mass 1 kg
  note on carbon content, fossil: C content in 1 kg DM was calculated using data in Tab A.2, ecoinvent v2.2 report 13_I
  note on heating value, net: Value taken from the general comment of the treatment dataset.
- waste polystyrene: -570 kg; lognormal variance with pedigree 0.0009, pedigree (2,2,2,1,1)
  Calculated value.
  According to Swiss law organic material has to be burned in incineration plants if no material reuse is possible.
  EcoSpold01Location=CH
  Uncertainty: According to Swiss law organic material has to be burned in incineration plants if no material reuse is possible.
  production volume
    (same comment as for waste plastic, mixture)
  properties: carbon content, fossil 0.922579, dry mass 0.998 kg, heating value, net 38.67 MJ, water content 0.00200401, wet mass 1 kg
- waste polyvinylchloride: -330 kg; lognormal variance with pedigree 0.0009, pedigree (2,2,2,1,1)
  (same comment as for waste polystyrene)
  production volume
    (same comment as for waste plastic, mixture)
  properties: carbon content, fossil 0.440882, dry mass 0.998 kg, heating value, net 21.51 MJ, water content 0.00200401, wet mass 1 kg
  note on carbon content, fossil: C content in 1 kg DM was calculated using data in Tab A.1, ecoinvent v2.2 report 13_I
- waste reinforced concrete: -298800 kg; lognormal variance with pedigree 0.0009, pedigree (2,2,2,1,1)
  Calculated value, assuming that the concrete will not be reused
  EcoSpold01Location=CH
  Uncertainty: Assuming that the concrete will not be reused
  production volume
    (same comment as for waste plastic, mixture)
  properties: dry mass 0.99418 kg, water content 0.00585407, wet mass 1 kg
- waste wood, untreated: -6600 kg; lognormal variance with pedigree 0.0009, pedigree (2,2,2,1,1)
  (same comment as for waste polystyrene)
  production volume
    (same comment as for waste plastic, mixture)
  properties: carbon content, non-fossil 0.48632, dry mass 0.8 kg, heating value, net 13.99 MJ, water content 0.25, wet mass 1 kg
  note on carbon content, non-fossil: Tab A.4, ecoinvent v2.2 report 13_I. C content has been referred to 1 kg DM,

## Inputs from nature
- Occupation, industrial area [natural resource, land]: 3600 m2*year; lognormal variance with pedigree 0.0807, pedigree (2,2,5,1,1)
  Calculated value. Only the plants without the stock has been taken into account, Because the stock is needed for the manure anyway. The lifetime is estimated 20 years.
  Uncertainty: Only the plants without the stock has been taken into account, Because the stock is needed for the manure anyway. The lifetime is estimated 20 years.
- Transformation, from heterogeneous, agricultural [natural resource, land]: 180 m2; lognormal variance with pedigree 0.0807, pedigree (2,2,5,1,1)
  Calculated value. Only the plants without the stock has been taken into account, Because the stock is needed for the manure anyway. The uncertainty has been estimated.
  Uncertainty: Only the plants without the stock has been taken into account, Because the stock is needed for the manure anyway. The uncertainty has been estimated.
- Transformation, to industrial area [natural resource, land]: 180 m2; lognormal variance with pedigree 0.0807, pedigree (2,2,5,1,1)
  (same comment as for Transformation, from heterogeneous, agricultural)

## Sampling procedure
The data are the average of 20 from 70 plants in Switzerland

## Extrapolations
no extrapolation was necessary because the typical plants for the region and time period were evaluated

## Review by Niels Jungbluth 2009-01-22
passed
none

## Review by Emilia Moreno Ruiz 2012-04-24
dataset documented by trainee Macela Valles Lange
