# desulfurisation of hard coal flue gas

Dataset: EcoSpold 2, unit process
Geography: RoW
Time period: 1985-01-01 to 2022-12-31
Technology level: current
Classification: ISIC rev.4 ecoinvent: 3510:Electric power generation, transmission and distribution
Synonyms: wet scrubber; DeSOx; flue-gas desulfurisation; wet lime scrubbing
Scenario: Business-as-Usual
System model: Allocation at the point of substitution
Generated by: Christian Bauer
Published in: Röder, A. 2007
Database: ecoinvent
isCopyrightProtected: true

## General comment
This dataset represents the service of flue-gas desulfurisation of hard coal flue gas (wet lime scrubbing with limestone). There are about 30 different ways of desulfurisation of hard coal flue gas. About 85% of the installed capacity of desulfurisation plants are installed as scrubber with lime (CaO) or limestone (CaCO3) (Vernon et al. 1990). The current proportion of desulfurisation with limestone is estimated with 80%. Limestone has a low reactivity, but is preferred to quicklime (CaO) and slaked lime (Ca(OH)2 for economic reasons (IIP 1990). In this dataset, a wet lime scrubbing with limestone is modeled, so that the gases SO2, SO3, HCl and HF are being absorbed in a scrubbing solution with CaCO3 as absorber.

The process steps are the detergent treatment, the absorption of flue gas components in the scrubbing suspension, the oxidation to sulfate (HSO3- to SO4-), the neutralization of the water suspension by the addition of limestone, crystallization of the gypsum, separation of the gypsum crystal from the mother liquor, calcination, pelleting or briquetting of gypsum for further use (IPP 1990, Baum 1988).

The sulfur dioxide (SO2) is precipitated as wet calcium sulfite (CaSO3) and can then be converted to gypsum (CaSO4 * 2H2O) through forced oxidation. Total reaction is the following:
CaCO3 + 2 H2O + SO2 + 0.5 O2 --> CaSO4 * 2H2O + CO2

The de-dusted flue gas is either cooled in a pre-scrubber or directly cooled in the absorber. There, the hydrogen halides, the residual dust particulates and up to 20% of the SO2 are washed out. The suspension from the pre-scrubber can also be removed separately. Thus, mixing with the gypsum can be prevented. Droplet separators retain entrained liquid droplets and the clean gas is reheated and discharged through the chimney. By air intake oxidation is encouraged in the scrubber sump to form the gypsum.
The pH-value, the ratio of the absorption liquid to the amount of exhaust gas and the concentration of absorption liquid significantly affect the separation efficiency.

Sources:
- Vernon, J.L., Soud, H.N. (1990). FGD installations on coal-fired plants. IEA Coal Research, London
- IIP Karlsruhe, Ministerium für Umwelt Baden-Württemberg (1990). Entsorgung von Reststoffen aus der Rauchgasreinigung; Teil 2: TA-Luft-Feuerungsanlagen. Karlsruhe
- Baum, F. (1988). Luftreinhaltung in der Praxis. München, Deutschland.

## Included activities start
Desulfurisation process starting with the operation of a hard coal power plant and receipt of the main input materials which are decarbonised water, lime, quicklime, sulfuric acid and sodium hydroxide.

## Included activities end
This activity ends with 1kg retained SOx in the form of gypsum resulting from the flue gas desulfurisation process of a coal power plant. The reference product is therefore the service of retaining 1kg of sulfur from the hard coal flue gas with the by-product gypsum.

This dataset includes the operation of a wet scrubber. It includes material input, emissions and solid waste. Own use of electricity and heat is included in the net efficiency of the power plant using the desulfurisation process.
This dataset includes the by-product gypsum, which is directly available for further use.

This dataset does not include a specific treatment of the wastewater containing many elements and compounds.

## Technology
In (Hövelmann 1987) an efficiency of 95% is quantified. In other sources, this value is estimated at 80%. The efficiency of the desulfurisation has to reach 90 % in large-scale power plants in the European Union so that this has been taken as representative value. Dry lime scrubbing only reaches efficiencies of 70 to 80% and is used in smaller units.

Hövelmann, A. (1987). Neue Entsorgungsprobleme kohlegefeuerter Kraftwerke. Jül-2172, KFA Jülich.

References:
Vernon J.L., Soud H.N. (1990) FGD installations on coal-fired plants. IEA Coal Research, London.
IIP Karlsruhe, Ministerium für Umwelt Baden-Württemberg (1990) Entsorgung von Reststoffen aus der Rauchgasreinigung; Teil 2: TA Luft-Feuerungsanlagen. Karlsruhe.
Baum F. (1988) Luftreinhaltung in der Praxis. München, Deutschland.
Hövelmann A. (1987) Neue Entsorgungsprobleme kohlegefeuerter Kraftwerke. Jül-2172, KFA Jülich.

## Parameters
- SOx, retained, in hard coal flue gas desulfurisation: 0.00201 kg/kWh; name sox_retained_hard_coal; lognormal variance with pedigree 0.044, pedigree (3,1,1,5,1)
  Calculated value. From “electricity production, hard coal, GLO 2015 ” Weighted average from all figures from countries in ecoinvent version 2 (AT, BE, BR, CN, CZ, DE, DK, ES, FI, FR, GB, ES, FI, FR, GB, HR, HU, IE, IT, JP, NL, NO, PL, PT, RO, SE, SI, SK) and the new countries for version 3 (AU, CA regions, CL, IN, KR, MX, MY, PE, RU, TH, TR, TW, TZ, UA, US regions, ZA). Weighting was made with net electricity production 2008 in these countries (Itten&Frischknecht 2012).
  BA and BG were not included in the calculation of the GLO average as they inherit all GLO values at the moment.
- annual production volume, electricity: 7.1088e12 kWh; name apv_electricity; lognormal variance with pedigree 0.0412, pedigree (2,1,5,1,1)
  Literature value. Electricity prodcution with hard coal in electricity only and heat and power plants worldwide in 2012.
  IEA/OECD. 2014. Electricity Information 2014. International Energy Agency (IEA), Paris Cedex (FR).
- fraction, cooling water, cooling pond system, to air: 0.032 dimensionless; name fraction_CW_CP_to_air; lognormal variance with pedigree 0.0413, pedigree (2,3,1,3,1)
  Calculated based on literature value (Scown, C.D., 2011, Water Footprint of U.S. Transportation Fuels and supplying information of the article) (Vionnet, S., Quantis Water Database - Technical Report, 2012).
- fraction, cooling water, once-through system, to air: 0.004 dimensionless; name fraction_CW_OT_to_air; lognormal variance with pedigree 0.0413, pedigree (2,3,1,3,1)
  (same comment as for fraction, cooling water, cooling pond system, to air)
- fraction, cooling water, recirculating system, to air: 0.771 dimensionless; name fraction_CW_R_to_air; lognormal variance with pedigree 0.0413, pedigree (2,3,1,3,1)
  (same comment as for fraction, cooling water, cooling pond system, to air)
- fraction, cooling water, to air: 0.3875 dimensionless; name fraction_CW_to_air; = (0.5*fraction_CW_OT_to_air)+(0.5*fraction_CW_R_to_air); lognormal variance with pedigree 0.092025, pedigree (4,4,3,2,4)
  Calculated value based on literature value (see comments of the other parametres present in this dataset) and expert opinion. In the case when no industry/literature data are available about the type of cooling or directly fraction, cooling water, to air specific for the process a default assumption is applied. It is assumed that the once-through cooling system is used in 50% of all cases and recirculating system is used in another 50% of all cases.
- fraction, water, decarbonised, to air: 0.3875 dimensionless; name fraction_WDC_to_air; = fraction_CW_to_air; lognormal variance with pedigree 0.092025, pedigree (4,4,3,2,4)
  Calculated value. See comments in the other parametres present in this dataset. Decarbonised water is considered to be always used as cooling water, thus cooling water fractions to air are applied to all carbonised water input flows to calculate the amount of water consumed in the processes.

## Reference product
- SOx retained, in hard coal flue gas desulfurisation: 1 kg; By-product classification allocatable product; CPC 34231: Chemical elements n.e.c.; inorganic acids except phosphoric, nitric and sulphonitric; inorganic oxygen compoun[…]
  This reference product is the SERVICE of retaining 1 kg sulfur from the hard coal flue gas with the main by-product gypsum containing the sulfur retained.
  EcoSpold01Location=RER
  production volume 1.30288e10 kg
    Calculated value.
    The dataset "electricity production, hard coal, GLO 2015" provides the value of 0.00201 kg of SOx retained in hard coal flue-gas desulfurisation per kWh of electricity produced and the annual production volume of hard coal electricity amounted to Value 6.7668E+12kWh.
  property price 0.18556 EUR2005
    Calculated based on inputs: The price of the product has been calculated as a sum of the values of the material and energy inputs for this product. This value is therefore a rough estimation. It may underestimate the real price since there are additional expenses when producing any product. These expences can include for example labour costs, treatment of waste materials and profit for the producer. Please consider carefully whether this level of data quality is acceptable for your application.
  properties: carbon allocation 0 kg, carbon content 0, carbon content, fossil 0, carbon content, non-fossil 0, dry mass 1 kg, water content 0, water in wet mass 0 kg, wet mass 1 kg

## Inputs from technosphere
- lime: 1.29771 kg; source Gebhard G. 1989; lognormal variance with pedigree 0.066, pedigree (3,4,5,5,1)
  Estimation. According to (Hövelmann 1987) 1.6 tons of limestone (CaCO3) per ton of SO2 is needed for a hard coal power plant (750 MW). The reaction equation of the limestone process is CaCO3 + 2H2O + SO2 + _O2 -> CaSO4 • 2H2O + CO2. It can be derived that stoichiometrically 1.56 kg of limestone is necessary and 0.69 kg of CO2 is produced per kg of SO2.
  Further references:
  Hövelmann A. (1987) Neue Entsorgungsprobleme kohlegefeuerter Kraftwerke. Jül-2172, KFA Jülich.
  Uerpmann E.-P. (1990) Betriebserfahrungen mit nasser Rauchgasentschwefelung in Braunkohlekraftwerken. In: VGB-Seminar Rauchgasreinigung und Reststoffentsorgung in Kraftwerken, Industrie- und Heizkraftwerken. Cottbus, Deutschland.
  see also Tab. 9.32 (Verschiedene REA-Bilanzen aus diversen Quellen) and Tab. 9.33, p.126f in Röder et al. (2007): REA-Massenbilanz pro kg reduziertes SO2, REA-Nass nach Tab. 9.33, REA-Nass Brk-D (Nass-Entschwefelung der westdeutschen Braunkohlekraftwerke)
  The tables are compilations of different sources for wet flue-gas desulfurisation mass-balances. Tab.9.33 shows the mass balance values chosen for this dataset.
  EcoSpold01Location=CH
  properties: carbon content, fossil 0.120005, dry mass 1 kg, wet mass 1 kg
- municipal solid waste: -8.4495e-5, -3.04256e-5, -0.0597582, -2.12906e-5 kg (4 suppliers, which the file names only by identifier); sum of these -0.0598944 kg; source Gebhard G. 1989; lognormal variance with pedigree 0.028, pedigree (3,4,3,5,1)
  Estimation. The radiation activity of the sludge is not negligible and, depending on the substance around 20-80 Bq kg per kg of separated SO2 respectively 10-50 kBq per TJin. The sludge is treated respectively disposed.
  Further references:
  Hövelmann A. (1987) Neue Entsorgungsprobleme kohlegefeuerter Kraftwerke. Jül-2172, KFA Jülich.
  Uerpmann E.-P. (1990) Betriebserfahrungen mit nasser Rauchgasentschwefelung in Braunkohlekraftwerken. In: VGB-Seminar Rauchgasreinigung und Reststoffentsorgung in Kraftwerken, Industrie- und Heizkraftwerken. Cottbus, Deutschland.
  see also Tab. 9.32 (Verschiedene REA-Bilanzen aus diversen Quellen) and Tab. 9.33, p.126f in Röder et al. (2007): REA-Massenbilanz pro kg reduziertes SO2, REA-Nass nach Tab. 9.33, REA-Nass Brk-D (Nass-Entschwefelung der westdeutschen Braunkohlekraftwerke)
  The tables are compilations of different sources for wet flue-gas desulfurisation mass-balances. Tab.9.33 shows the mass balance values chosen for this dataset.
  EcoSpold01Location=CH
  production volume
    Calculated from the production volume of SOx retained, in hard coal flue gas desulfurisation in proportion to the respective output amounts.
  properties: carbon content, fossil 0.171549, carbon content, non-fossil 0.261655, dry mass 0.771 kg, heating value, net 11.74 MJ, water content 0.297017, wet mass 1 kg
  note on carbon content, fossil: MSW composition in tab 4.1, ecoinvent v2.2 report 13_I. C content referred to 1 kg DM
  note on heating value, net: Value taken from the general comment of the treatment dataset.
- quicklime, milled, loose: 0.199648 kg; source Gebhard G. 1989; lognormal variance with pedigree 0.066, pedigree (3,4,5,5,1)
  Estimation.
  Further references:
  Uerpmann E.-P. (1990) Betriebserfahrungen mit nasser Rauchgasentschwefelung in Braunkohlekraftwerken. In: VGB-Seminar Rauchgasreinigung und Reststoffentsorgung in Kraftwerken, Industrie- und Heizkraftwerken. Cottbus, Deutschland.
  see alsoTab. 9.32 (Verschiedene REA-Bilanzen aus diversen Quellen) and Tab. 9.33, p.126f in Röder et al. (2007): REA-Massenbilanz pro kg reduziertes SO2, REA-Nass nach Tab. 9.33, REA-Nass Brk-D (Nass-Entschwefelung der westdeutschen Braunkohlekraftwerke)
  The tables are compilations of different sources for wet flue-gas desulfurisation mass-balances. Tab.9.33 shows the mass balance values chosen for this dataset.
  EcoSpold01Location=CH
  properties: dry mass 0.99 kg, water content 0.010101, wet mass 1 kg
- sodium hydroxide, without water, in 50% solution state: 0.0199648 kg; source Gebhard G. 1989; lognormal variance with pedigree 0.066, pedigree (3,4,5,5,1)
  Estimation.
  Further references:
  Uerpmann E.-P. (1990) Betriebserfahrungen mit nasser Rauchgasentschwefelung in Braunkohlekraftwerken. In: VGB-Seminar Rauchgasreinigung und Reststoffentsorgung in Kraftwerken, Industrie- und Heizkraftwerken. Cottbus, Deutschland.
  see alsoTab. 9.32 (Verschiedene REA-Bilanzen aus diversen Quellen) and Tab. 9.33, p.126f in Röder et al. (2007): REA-Massenbilanz pro kg reduziertes SO2, REA-Nass nach Tab. 9.33, REA-Nass Brk-D (Nass-Entschwefelung der westdeutschen Braunkohlekraftwerke)
  The tables are compilations of different sources for wet flue-gas desulfurisation mass-balances. Tab.9.33 shows the mass balance values chosen for this dataset.
  EcoSpold01Location=RER
  properties: dry mass 1 kg, heating value, net 3.03 MJ, wet mass 1 kg
- sulfuric acid: 0.0798592 kg; source Gebhard G. 1989; lognormal variance with pedigree 0.066, pedigree (3,4,5,5,1)
  EcoSpold01Location=RER
  Estimation.
  Further references:
  Uerpmann E.-P. (1990) Betriebserfahrungen mit nasser Rauchgasentschwefelung in Braunkohlekraftwerken. In: VGB-Seminar Rauchgasreinigung und Reststoffentsorgung in Kraftwerken, Industrie- und Heizkraftwerken. Cottbus, Deutschland.
  see alsoTab. 9.32 (Verschiedene REA-Bilanzen aus diversen Quellen) and Tab. 9.33, p.126f in Röder et al. (2007): REA-Massenbilanz pro kg reduziertes SO2, REA-Nass nach Tab. 9.33, REA-Nass Brk-D (Nass-Entschwefelung der westdeutschen Braunkohlekraftwerke)
  The tables are compilations of different sources for wet flue-gas desulfurisation mass-balances. Tab.9.33 shows the mass balance values chosen for this dataset.
  properties: dry mass 1 kg, wet mass 1 kg
- waste gypsum: -2.79507 kg; name gypsum
  Literature value. The gypsum (CaSO2 * 2H2O) contains the retained sulfur and a certain amount of the input water. Gypsum resulting from wet lime scrubbing shows impurities of up to 6% (Calcite, CaCl2, Fluoride, flue ash, clays, silicates, quartz, ferric oxide, dolomite, siderite) (IIP 1990). Still, the quality of the gypsum is high enough so that it can be sold on the market.
  Tab. 9.32 (Verschiedene REA-Bilanzen aus diversen Quellen) and Tab. 9.33, p.126f in Röder et al. (2007): REA-Massenbilanz pro kg reduziertes SO2, REA-Nass nach Tab. 9.33, REA-Nass Brk-D (Nass-Entschwefelung der westdeutschen Braunkohlekraftwerke). The tables are compilations of different sources for wet flue-gas desulfurisation mass-balances. Tab.9.33 shows the mass balance values chosen for this dataset.
  Source:
  IIP Karlsruhe, Ministerium für Umwelt Baden-Württemberg (1990). Entsorgung von Reststoffen aus der Rauchgasreinigung; Teil 2: TA Luft-Feuerungsanlagen. Karlsruhe]
  production volume
    Calculated from production volume of reference product using the relative outputs.
  properties: dry mass 0.806 kg, water content 0.240695, wet mass 1 kg
- wastewater, average: -1.77075e-5, -0.0049735 m3 (2 suppliers, which the file names only by identifier); sum of these -0.0049912 m3; source Röder, A. 2007; lognormal variance with pedigree 0.028, pedigree (3,4,3,5,1)
  Literature value. 5 kg waste water per kg SO2 retained, containing all emissions to water in this dataset. An average sewage is assumed, which is a simplification. Initial input of water was 20kg; the remaining parts are in the gypsum, the sludge and in the air.
  This water can be used for humidification of the ash and is then disposed off together with the ash (Gebhard et al. 1989).
  Tab. 9.32 (Verschiedene REA-Bilanzen aus diversen Quellen) and Tab. 9.33, p.126f in Röder et al. (2007): REA-Massenbilanz pro kg reduziertes SO2, REA-Nass nach Tab. 9.33, REA-Nass Brk-D (Nass-Entschwefelung der westdeutschen Braunkohlekraftwerke). The tables are compilations of different sources for wet flue-gas desulfurisation mass-balances. Tab.9.33 shows the mass balance values chosen for this dataset.
  Gebhard G., Lukas W., Bambauer H.U. (1989) Stabilisierung von Rückständen aus der Braunkohleentschwefelung. In: VGB Kraftwerkstechnik 69, Heft 4, 1989, s.384-392.
  production volume
    Calculated from production volume of reference product using the relative outputs.
  properties: carbon content, non-fossil 0.194039, dry mass 0.346837 kg, water content 2882.2, wet mass 1000 kg
  note on carbon content, non-fossil: 0.0673 kg TOC/m3 (Tab A.17, ecoinvent v2.2 report 13_I). TOC was considered as Total Carbon.
- water, decarbonised: 7.54599, 1.00552, 0.0493649, 6.40554, 4.05552, 0.516433, 0.386444 kg (7 suppliers, which the file names only by identifier); sum of these 19.9648 kg; source Gebhard G. 1989; lognormal variance with pedigree 0.066, pedigree (3,4,5,5,1)
  EcoSpold01Location=RER
  Estimation. The water for the desulfurisation process does not need to meet any higher demands and corresponds to the quality of cooling water.
  Further references:
  Uerpmann E.-P. (1990) Betriebserfahrungen mit nasser Rauchgasentschwefelung in Braunkohlekraftwerken. In: VGB-Seminar Rauchgasreinigung und Reststoffentsorgung in Kraftwerken, Industrie- und Heizkraftwerken. Cottbus, Deutschland.
  see also Tab. 9.32 (Verschiedene REA-Bilanzen aus diversen Quellen) and Tab. 9.33, p.126f in Röder et al. (2007): REA-Massenbilanz pro kg reduziertes SO2, REA-Nass nach Tab. 9.33, REA-Nass Brk-D (Nass-Entschwefelung der westdeutschen Braunkohlekraftwerke)
  The tables are compilations of different sources for wet flue-gas desulfurisation mass-balances. Tab.9.33 shows the mass balance values chosen for this dataset.
  Estimation. The water for the desulfurisation process does not need to meet any higher demands and corresponds to the quality of cooling water.
  Further references:
  Uerpmann E.-P. (1990) Betriebserfahrungen mit nasser Rauchgasentschwefelung in Braunkohlekraftwerken. In: VGB-Seminar Rauchgasreinigung und Reststoffentsorgung in Kraftwerken, Industrie- und Heizkraftwerken. Cottbus, Deutschland.
  see also Tab. 9.32 (Verschiedene REA-Bilanzen aus diversen Quellen) and Tab. 9.33, p.126f in Röder et al. (2007): REA-Massenbilanz pro kg reduziertes SO2, REA-Nass nach Tab. 9.33, REA-Nass Brk-D (Nass-Entschwefelung der westdeutschen Braunkohlekraftwerke)
  The tables are compilations of different sources for wet flue-gas desulfurisation mass-balances. Tab.9.33 shows the mass balance values chosen for this dataset.
  properties: wet mass 1 kg

## Emissions to nature
- Carbon dioxide, fossil [air, non-urban air or from high stacks]: 0.549032 kg; source Gebhard G. 1989; lognormal variance with pedigree 0.066, pedigree (3,4,5,5,1)
  Estimation. According to (Hövelmann 1987) 1.6 tons of limestone (CaCO3) per ton of SO2 is needed for a hard coal power plant (750 MW). The reaction equation of the limestone process is CaCO3 + 2H2O + SO2 + _O2 -> CaSO4 • 2H2O + CO2. It can be derived that stoichiometrically 1.56 kg of limestone is necessary and 0.69 kg of CO2 is produced per kg of SO2.
  Further references:
  Hövelmann A. (1987) Neue Entsorgungsprobleme kohlegefeuerter Kraftwerke. Jül-2172, KFA Jülich.
  Uerpmann E.-P. (1990) Betriebserfahrungen mit nasser Rauchgasentschwefelung in Braunkohlekraftwerken. In: VGB-Seminar Rauchgasreinigung und Reststoffentsorgung in Kraftwerken, Industrie- und Heizkraftwerken. Cottbus, Deutschland.
  see also Tab. 9.34, p.126 in Röder et al. (2007): Konzentrationen von Ionen des REA-Abwassers vor und nach der Reinigung mit ARA und für diese Projekt gewählt Werte.
  The table is a compilation of different sources and shows the values chosen for this dataset.
- Water [air, unspecified]: 0.00773636 m3; name water_to_air_unspecified; = (water_decarbonised_input/1000)*fraction_WDC_to_air; lognormal variance with pedigree 0.130025, pedigree (4,4,5,2,4)
  Calculated value based on literature values and expert opinion. See comments in the parametres' comment field.
  property fraction, origin: fresh water 1; name fraction_origin_fresh_water
  property fraction, origin: salt water 0; name fraction_origin_salt_water
  property fraction, origin: unspecified 0; name fraction_origin_unspecified
- Aluminium III [water, surface water]: 2.99472e-6 kg; source Hövelmann A. 1987; lognormal variance with pedigree 0.706, pedigree (3,4,5,5,1)
  Estimation. Data and discharge limits for wastewater emissions are mainly taken from Germany.
  Further references:
  Bambauer H.U., Gebhard G., Holzapfel Th., Krause Ch., Willner G. (1988) Schadstoff-Immobilisierung in Stabilisaten aus Braunkohleaschen und REA-Produkten. In: Fortschr. Miner. 66, 2, s.253-290. Stuttgart.
  Grünewald K.G., Dettmann P., Fassbänder M., Jahn P. (1991) Bau- und Betriebserfahrungen mit der ersten abwasserfreien Pilot-Anlage zur REA-Abwasseraufbereitung mit Wertstoffrückgewinnung. VGB Kraftwerk und Umwelt.
  Kyte W.S. (1991) Waste and Water Issues. Proceedings "Coal in the Environment", London.
  Syring H. (1990) REA-Abwasser-Beseitigung. In: VGB-Seminar "Rauchgasreinigung und Reststoffentsorgung in Kraftwerken, Industrie- und Heizkraftwerken, Cottbus.
  see also Tab. 9.34, p.126 in Röder et al. (2007): Konzentrationen von Ionen des REA-Abwassers vor und nach der Reinigung mit ARA und für diese Projekt gewählt Werte.
  The table is a compilation of different sources and shows the values chosen for this dataset.
- Ammonium [water, surface water]: 3.84323e-6 kg; source Hövelmann A. 1987; lognormal variance with pedigree 0.096, pedigree (3,4,5,5,1)
  (same comment as for Aluminium III)
- Antimony ion [water, surface water]: 2.99472e-6 kg; source Hövelmann A. 1987; lognormal variance with pedigree 0.706, pedigree (3,4,5,5,1)
  (same comment as for Aluminium III)
- Arsenic ion [water, surface water]: 4.9912e-6 kg; source Hövelmann A. 1987; lognormal variance with pedigree 0.706, pedigree (3,4,5,5,1)
  (same comment as for Aluminium III)
- BOD5, Biological Oxygen Demand [water, surface water]: 2.4956e-5 kg; source Hövelmann A. 1987; lognormal variance with pedigree 0.096, pedigree (3,4,5,5,1)
  Estimation. Data and discharge limits for wastewater emissions are mainly used from Germany. (Hövelmann 1987, Syring 1990, Grünewald et al. 1991, Kyte 1991, Bambauer et al. 1988).
  Further references:
  Bambauer H.U., Gebhard G., Holzapfel Th., Krause Ch., Willner G. (1988) Schadstoff-Immobilisierung in Stabilisaten aus Braunkohleaschen und REA-Produkten. In: Fortschr. Miner. 66, 2, s.253-290. Stuttgart.
  Grünewald K.G., Dettmann P., Fassbänder M., Jahn P. (1991) Bau- und Betriebserfahrungen mit der ersten abwasserfreien Pilot-Anlage zur REA-Abwasseraufbereitung mit Wertstoffrückgewinnung. VGB Kraftwerk und Umwelt.
  Kyte W.S. (1991) Waste and Water Issues. Proceedings "Coal in the Environment", London.
  Syring H. (1990) REA-Abwasser-Beseitigung. In: VGB-Seminar "Rauchgasreinigung und Reststoffentsorgung in Kraftwerken, Industrie- und Heizkraftwerken, Cottbus.
  see also Tab. 9.34, p.126 in Röder et al. (2007): Konzentrationen von Ionen des REA-Abwassers vor und nach der Reinigung mit ARA und für diese Projekt gewählt Werte.
  The table is a compilation of different sources and shows the values chosen for this dataset.
- Boron [water, surface water]: 0.000329419 kg; source Hövelmann A. 1987; lognormal variance with pedigree 0.706, pedigree (3,4,5,5,1)
  (same comment as for Aluminium III)
- COD, Chemical Oxygen Demand [water, surface water]: 0.00074868 kg; source Hövelmann A. 1987; lognormal variance with pedigree 0.096, pedigree (3,4,5,5,1)
  (same comment as for Aluminium III)
- Cadmium II [water, surface water]: 2.99472e-7 kg; source Hövelmann A. 1987; lognormal variance with pedigree 0.706, pedigree (3,4,5,5,1)
  (same comment as for Aluminium III)
- Calcium II [water, surface water]: 0.049912 kg; source Hövelmann A. 1987; lognormal variance with pedigree 0.706, pedigree (3,4,5,5,1)
  (same comment as for Aluminium III)
- Chloride [water, surface water]: 0.24956 kg; source Hövelmann A. 1987; lognormal variance with pedigree 0.096, pedigree (3,4,5,5,1)
  (same comment as for Aluminium III)
- Chromium III [water, surface water]: 2.99472e-6 kg; source Hövelmann A. 1987; lognormal variance with pedigree 0.706, pedigree (3,4,5,5,1)
  (same comment as for Aluminium III)
- Copper ion [water, surface water]: 2.99472e-6 kg; source Hövelmann A. 1987; lognormal variance with pedigree 0.706, pedigree (3,4,5,5,1)
  (same comment as for Aluminium III)
- DOC, Dissolved Organic Carbon [water, surface water]: 0.000277289 kg; source Hövelmann A. 1987; lognormal variance with pedigree 0.096, pedigree (3,4,5,5,1)
  (same comment as for Aluminium III)
- Fluoride [water, surface water]: 0.000149736 kg; source Hövelmann A. 1987; lognormal variance with pedigree 0.096, pedigree (3,4,5,5,1)
  (same comment as for Aluminium III)
- Iron ion [water, surface water]: 2.99472e-6 kg; source Hövelmann A. 1987; lognormal variance with pedigree 0.706, pedigree (3,4,5,5,1)
  (same comment as for Aluminium III)
- Lead II [water, surface water]: 4.9912e-7 kg; source Hövelmann A. 1987; lognormal variance with pedigree 0.706, pedigree (3,4,5,5,1)
  (same comment as for Aluminium III)
- Lead-210 [water, surface water]: 0.0469173 kBq; source Hövelmann A. 1987; lognormal variance with pedigree 0.366, pedigree (3,4,5,5,1)
  Literature value. In the wastewater of the desulfurisation plant radioactive elements occur and must be detected. The radiation activities of these elements are not very relevant and the maximum values can be significantly (factor 10) higher.
  see also Tab. 9.35, p.127 in Röder et al. (2007): Radioaktive Elemente im REA-Abwasser und REA-Schlamm eines Steinkohlekraftwerkes (Hövelmann 1987).
  The table is a compilation of radioactive elements in the wastewater and sewage sludge of the flue gas desulfurisation.
- Magnesium [water, surface water]: 0.00998241 kg; source Hövelmann A. 1987; lognormal variance with pedigree 0.706, pedigree (3,4,5,5,1)
  (same comment as for Aluminium III)
- Manganese II [water, surface water]: 4.9912e-6 kg; source Hövelmann A. 1987; lognormal variance with pedigree 0.706, pedigree (3,4,5,5,1)
  (same comment as for Aluminium III)
- Mercury II [water, surface water]: 2.99472e-7 kg; source Hövelmann A. 1987; lognormal variance with pedigree 0.706, pedigree (3,4,5,5,1)
  (same comment as for Aluminium III)
- Molybdenum VI [water, surface water]: 2.99472e-6 kg; source Hövelmann A. 1987; lognormal variance with pedigree 0.706, pedigree (3,4,5,5,1)
  (same comment as for Aluminium III)
- Nickel II [water, surface water]: 2.99472e-6 kg; source Hövelmann A. 1987; lognormal variance with pedigree 0.706, pedigree (3,4,5,5,1)
  (same comment as for Aluminium III)
- Nitrate [water, surface water]: 0.0049912 kg; source Hövelmann A. 1987; lognormal variance with pedigree 0.096, pedigree (3,4,5,5,1)
  (same comment as for Aluminium III)
- Phosphate [water, surface water]: 1.99648e-6 kg; source Hövelmann A. 1987; lognormal variance with pedigree 0.096, pedigree (3,4,5,5,1)
  (same comment as for Aluminium III)
- Polonium-210 [water, surface water]: 0.0469173 kBq; source Hövelmann A. 1987; lognormal variance with pedigree 0.366, pedigree (3,4,5,5,1)
  (same comment as for Lead-210)
- Potassium I [water, surface water]: 4.9912e-5 kg; source Hövelmann A. 1987; lognormal variance with pedigree 0.706, pedigree (3,4,5,5,1)
  (same comment as for Aluminium III)
- Potassium-40 [water, surface water]: 0.0588962 kBq; source Hövelmann A. 1987; lognormal variance with pedigree 0.366, pedigree (3,4,5,5,1)
  (same comment as for Lead-210)
- Radium-226 [water, surface water]: 0.028949 kBq; source Hövelmann A. 1987; lognormal variance with pedigree 0.366, pedigree (3,4,5,5,1)
  (same comment as for Lead-210)
- Selenium IV [water, surface water]: 4.9912e-7 kg; source Hövelmann A. 1987; lognormal variance with pedigree 0.706, pedigree (3,4,5,5,1)
  (same comment as for Aluminium III)
- Sodium I [water, surface water]: 0.0024956 kg; source Hövelmann A. 1987; lognormal variance with pedigree 0.706, pedigree (3,4,5,5,1)
  (same comment as for Aluminium III)
- Sulfate [water, surface water]: 0.00998241 kg; source Hövelmann A. 1987; lognormal variance with pedigree 0.096, pedigree (3,4,5,5,1)
  (same comment as for Aluminium III)
- Sulfite [water, surface water]: 9.98241e-5 kg; source Hövelmann A. 1987; lognormal variance with pedigree 0.096, pedigree (3,4,5,5,1)
  (same comment as for Aluminium III)
- Suspended solids, unspecified [water, surface water]: 2.99472e-6 kg; source Hövelmann A. 1987; lognormal variance with pedigree 0.096, pedigree (3,4,5,5,1)
  (same comment as for Aluminium III)
- TOC, Total Organic Carbon [water, surface water]: 0.000277289 kg; source Hövelmann A. 1987; lognormal variance with pedigree 0.096, pedigree (3,4,5,5,1)
  (same comment as for Aluminium III)
- Thorium-232 [water, surface water]: 0.0109806 kBq; source Hövelmann A. 1987; lognormal variance with pedigree 0.366, pedigree (3,4,5,5,1)
  (same comment as for Lead-210)
- Tin ion [water, surface water]: 2.99472e-6 kg; source Hövelmann A. 1987; lognormal variance with pedigree 0.706, pedigree (3,4,5,5,1)
  (same comment as for Aluminium III)
- Uranium-238 [water, surface water]: 0.0229595 kBq; source Hövelmann A. 1987; lognormal variance with pedigree 0.366, pedigree (3,4,5,5,1)
  (same comment as for Lead-210)
- Vanadium V [water, surface water]: 2.99472e-6 kg; source Hövelmann A. 1987; lognormal variance with pedigree 0.706, pedigree (3,4,5,5,1)
  (same comment as for Aluminium III)
- Water [water, unspecified]: 0.00723724 m3; name water_to_water_unspecified; = (water_decarbonised_input/1000)*(1-fraction_WDC_to_air)-sewage; lognormal variance with pedigree 0.130025, pedigree (4,4,5,2,4)
  (same comment as for Water)
  property fraction, origin: fresh water 1; name fraction_origin_fresh_water_Ww
  property fraction, origin: salt water 0; name fraction_origin_salt_water_Ww
  property fraction, origin: unspecified 0; name fraction_origin_unspecified_Ww
- Zinc II [water, surface water]: 4.9912e-6 kg; source Hövelmann A. 1987; lognormal variance with pedigree 0.706, pedigree (3,4,5,5,1)
  (same comment as for Aluminium III)

## Sampling procedure
literature

## Extrapolations
This dataset has been copied from an original dataset covering the geography RER. The uncertainty has been adjusted accordingly.

The dataset only takes into account one possible desulfurisation technology out of about 30 technologies; but this technology is the dominating way of desulfurisation, widely installed and used.

Old data from around 1990 have been extrapolated up until 2000. The annual production volume has been calculated with a parameter value from 2008.

## Review by Hans-Jörg Althaus 2003-07-04
passed

## Review by Bo Weidema 2012-02-15
To enure mass balance, the reference product should have been modelled as a negative flow of SOx, which should then matches a similar output from the hard coal power plants. Dataset accepted for now, to enable inclusion in ecoinvent v.3.

## Review by Carl Vadenbo 2012-02-15
The dataset were found to meet the quality guidelines for the ecoinvent database on 2012.06.27. It should be noticed that emissions to surface water have been modelled directly in the dataset, but that the data provider has committed to address this aspect for subsequent releases of the database by entering the pollutant load as properties of the wastewater. This will allow parameterized datasets of wastewater and effluent treatments to derive the resulting emissions based on, for example, geography.
