# treatment of sewage sludge, 97% water, WWT, WW from vegetable oil refinery, landfarming

Dataset: EcoSpold 2, unit process
Geography: GLO
Time period: 2000-01-01 to 2022-12-31
Technology level: current
Classification: ISIC rev.4 ecoinvent: 3821:Treatment and disposal of non-hazardous waste
Scenario: Business-as-Usual
System model: Allocation at the point of substitution
Generated by: Nikolia Stoikou
Database: ecoinvent
isCopyrightProtected: true

## General comment
The process represents the treatment of a waste (sewage sludge) that is exclusively produced from another waste treatment. Recommended use of this dataset: to be used within the specific chain of treatments for 'wastewater from vegetable oil refinery'. Share of biogenic carbon in the sludge: 98.96%.

## Included activities start
The activity starts with the waste being available for landfarming. Collection and transportation of the waste to this process is not included.

## Included activities end
The activity ends with the waste being treated and waste-specific emissions from the landfarming process are released to the environment (air, water and soil). The activity is considering local fate of emissions and the initial specific wastewater composition (generating the sewage sludge). Further, it includes provision of fertiliser functions for N, P, K, if present in the sludge.

## Geography
The site has mean annual temperature (MAT) of 16.743579766537 degC, mean annual precipitation (MAP) of 1250.84108527132 mm/year, mean annual actual evaporation (EAT) of 460.58904958214 mm/year. Climate will influence the local fate emissions based on the elemental composition of the sludge as well as water evaporation to air (= consumptive water use).
References: UN data, 2020. Precipitation, Environment Statistics Database, United Nations Statistics Division Available at: http://data.un.org/Data.aspx?q=precipitation&d=ENV&f=variableID%3a6;
World Bank, 2022. Surface area (sq.km), World Bank Group Available at: https://data.worldbank.org/indicator/AG.SRF.TOTL.K2;
Doka G.,2021. A model for composition-specific life cycle inventories of regionalised wastewater fates, Zurich, Switzerland. http://www.doka.ch/publications.htm

## Technology
Landfarming is the process of spreading a substrate on agricultural soil. Sewage sludge is generated in the wastewater treatment of wastewater from vegetable oil refinery. Spreading of liquid sewage sludge (97w% water content) on agricultural fields with mobile vacuum tanker.

## Reference product
- organic phosphorus fertiliser, as P2O5: 1 kg; By-product classification allocatable product; CPC 34659: Fertilizers n.e.c.; lognormal variance with pedigree 0.046341, pedigree (1,1,1,1,1)
  gross fertilizer function provided from sewage sludge spreading on agricultural fields.
  Uncertainty: Uncertainty calculated from upstream wastewater technosphere fate uncertainty, wastewater composition uncertainty, and treatment model uncertainty
  production volume 1.89302e9 kg
    Calculated in proportion to wastewater reference product.
  property oxygen content 0.563579
    Oxygen content (on a dry matter basis) of organic phosphorus fertiliser, as P2O5 is calculated from the molecular formula of the substance (Phosphorus).
  property phosphorus content 0.436421
    Phosphorus content (on a dry matter basis) of organic phosphorus fertiliser, as P2O5 is calculated from the molecular formula of the substance (Phosphorus).
  property price 0.241 EUR2005
    Set equal to the price of the corresponding inorganic fertiliser
  properties: carbon allocation 0 kg, carbon content 0, carbon content, fossil 0, carbon content, non-fossil 0, dry mass 1 kg, water content 0, water in wet mass 0 kg, wet mass 1 kg

## Inputs from technosphere
- air compressor, screw-type compressor, 300kW: 2.92727e-8 unit
- air compressor, screw-type compressor, 4kW: 2.74035e-9 unit
- alkyd paint, white, without solvent, in 60% solution state: 2.06258e-8, 1.57183e-7 kg (2 suppliers, which the file names only by identifier); sum of these 1.77809e-7 kg
- aluminium, primary, ingot: 6.97292e-8, 1.08358e-7, 1.96753e-8, 1.14245e-8 kg (4 suppliers, which the file names only by identifier); sum of these 2.09187e-7 kg
- building, hall, steel construction: 3.34236e-5 m2
- carton board box production, with offset printing: 0.000952684 kg
- chlorine, liquid: 6.01837e-7, 7.52409e-8 kg (2 suppliers, which the file names only by identifier); sum of these 6.77078e-7 kg
- chromium steel pipe: 4.56388e-5 kg
- concrete, normal strength: 1.74323e-8, 7.87766e-11, 5.89945e-11, 8.7044e-10, 9.06987e-11, 7.34269e-10, 3.11389e-8, 1.74905e-9, 1.43357e-10 m3 (9 suppliers, which the file names only by identifier); sum of these 5.22968e-8 m3
- copper scrap, sorted, pressed: -0.000120304 kg
- copper, cathode: 0.000120304 kg
- cottonseed oil, crude: 0.0126935 kg
- drawing of pipe, steel: 4.56388e-5 kg
- electricity, medium voltage: 0.000753224, 0.000679239, 1.23493e-7, 2.56823e-5, 9.4827e-6, 1.46497e-6, 7.21433e-6, 1.69903e-6, 5.8284e-5, 8.3556e-7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 kWh (35 suppliers, which the file names only by identifier); sum of these 0.00522941 kWh
- extrusion of plastic sheets and thermoforming, inline: 4.23352e-6 kg
- extrusion, plastic film: 0.00017301 kg
- fish canning plant: 1.13864e-12, 1.18737e-11 unit (2 suppliers, which the file names only by identifier); sum of these 1.30124e-11 unit
- gas boiler: 5.48071e-10 unit
- generator, 200kW electrical: 1.45879e-8 unit
- glass fibre reinforced plastic, polyamide, injection moulded: 3.71306e-6 kg
- glass wool mat: 7.24046e-5 kg
- heat, district or industrial, natural gas: 0.0149513, 0.00078072 MJ (2 suppliers, which the file names only by identifier); sum of these 0.015732 MJ
- heat, district or industrial, other than natural gas: 0.00487385, 0.0380658 MJ (2 suppliers, which the file names only by identifier); sum of these 0.0429396 MJ
- industrial furnace, 1MW, oil: 2.163e-8 unit
- industrial furnace, natural gas: 1.44108e-8 unit
- lubricating oil: 4.02832e-6, 5.28579e-7 kg (2 suppliers, which the file names only by identifier); sum of these 4.5569e-6 kg
- metal working, average for chromium steel product manufacturing: 0.000439641 kg
- methyl ethyl ketone: 2.5647e-8, 5.73109e-9 kg (2 suppliers, which the file names only by identifier); sum of these 3.13781e-8 kg
- operation, reefer, freezing: 0.00108264 kg*day
- palm oil, crude: 0.175914 kg
- polyethylene, high density, granulate: 4.23352e-6 kg
- polyethylene, low density, granulate: 0.00017301 kg
- polymer foaming: 9.40436e-7 kg
- propane, burned in building machine: 2.44513e-5 MJ
- pump, 40W: 2.85905e-8 unit
- scrap steel: -1.40173e-8, -5.708e-5, -1.10637e-5 kg (3 suppliers, which the file names only by identifier); sum of these -6.81578e-5 kg
- scrap tin sheet: -8.48636e-5, -0.00638374 kg (2 suppliers, which the file names only by identifier); sum of these -0.0064686 kg
- sheet rolling, aluminium: 2.09187e-7 kg
- soap: 7.5667e-6 kg
- sodium chloride, powder: 0.000178823 kg
- sodium hydroxide, without water, in 50% solution state: 0.000609557 kg
- solvent, organic: 0.000107874 kg
- soybean oil, crude: 0.0732004, 0.0124858 kg (2 suppliers, which the file names only by identifier); sum of these 0.0856862 kg
- spent solvent mixture: -8.73566e-5, -4.70395e-7, -2.0078e-5 kg (3 suppliers, which the file names only by identifier); sum of these -0.000107905 kg
- steel, chromium steel 18/8: 2.25189e-5 kg
- steel, low-alloyed: 2.46841e-6 kg
- tap water: 0.000358601, 39.0272, 0.0149442, 0.00956053, 0.127701, 0.00110585, 2.20891, 0.103222, 0.0480582 kg (9 suppliers, which the file names only by identifier); sum of these 41.541 kg
- tin plated chromium steel sheet, 2 mm: 0.000414654 m2
- used insulation spiral-seam duct rockwool, DN 400: -7.19983e-5, -4.06276e-7 m (2 suppliers, which the file names only by identifier); sum of these -7.24046e-5 m
- vegetable oil refinery: 2.97034e-11 unit
- vegetable oil, refined: 0.00391565 kg
- waste aluminium: -2.09187e-7 kg
- waste concrete: -2.10564e-8, -0.000124765, -5.95552e-6 kg (3 suppliers, which the file names only by identifier); sum of these -0.000130742 kg
- waste mineral oil: -2.06429e-8, -3.7024e-6, -8.33852e-7 kg (3 suppliers, which the file names only by identifier); sum of these -4.5569e-6 kg
- waste paint on wall: -1.77809e-7 kg
- waste plastic, mixture: -2.75255e-7, -1.39092e-9, -1.23772e-6, -2.38558e-7, -1.92693e-6, -1.83915e-8, -7.21343e-9, -7.59633e-9 kg (8 suppliers, which the file names only by identifier); sum of these -3.71306e-6 kg
- waste polyethylene, for recycling, unsorted: -3.89915e-5, -6.02691e-5, -3.89915e-5, -3.89915e-5 kg (4 suppliers, which the file names only by identifier); sum of these -0.000177244 kg
- wastewater from vegetable oil refinery: -0.0281131 m3
- water, completely softened: 0.561766, 0.781576, 1.36908 kg (3 suppliers, which the file names only by identifier); sum of these 2.71243 kg
- wire drawing, copper: 7.4665e-5 kg

## Emissions to nature
- Water [air, non-urban air or from high stacks]: 0.0150554 m3
- BOD5, Biological Oxygen Demand [water, unspecified]: 1.10072e-6 kg
- COD, Chemical Oxygen Demand [water, unspecified]: 6.85831e-6 kg
- DOC, Dissolved Organic Carbon [water, unspecified]: 1.74986e-6 kg
- Nitrogen [water, unspecified]: 6.60412e-7 kg
- Phosphorus [water, unspecified]: 1.3533e-7 kg
- TOC, Total Organic Carbon [water, unspecified]: 1.74986e-6 kg
