# transport, pipeline, long distance, natural gas

Dataset: EcoSpold 2, unit process
Geography: NL
Time period: 2000-01-01 to 2022-12-31
Technology level: current
Classification: ISIC rev.4 ecoinvent: 4930:Transport via pipeline
Classification: EcoSpold01Categories: natural gas/production
Scenario: Business-as-Usual
System model: Allocation at the point of substitution
Share of production covered: 100 %
Generated by: Mireille Faist Emmenegger
Published in: Faist Emmenegger, Mireille 2015
Database: ecoinvent
isCopyrightProtected: true

## General comment
This dataset describes the transport from the Netherlands to importing countries in Europe. Leakages per 1'000 km are based on on data collected by Marcogaz by several natural gas companies..

## Included activities end
This dataset describes the energy consumption and the emissions linked to the transport of 1 tkm Dutch natural gas in an onshore pipeline with a small offshore distance.

## Geography
The data for emissions and for energy requirements is based on the environmental report of a Dutch company as in the ecoinvent v2 datasets.

## Technology
Long-distance gas transport onshore with average compressor station.

## Time period
The composition of the gas stems from 1994, the data for energy requirements from 2001, the leakage rate from 2006.

## Reference product
- transport, pipeline, long distance, natural gas: 1 metric ton*km; By-product classification allocatable product; CPC 65131: Transport services via pipeline of petroleum and natural gas
  EcoSpold01Location=NL
  production volume 2.73504e10 metric ton*km
    69.3 e9 Nm3
    //Comment added during dataset update://
    36600 million m3 at 0.56 tkm/m3 and 40800 million m3 at 0.168 tkm/m3 (from data in datasets ; ref. Ecoinvent v2 report 06_V)
  property price 0.106 EUR2005
    Same calculations in file R61. The variations is due to industry price per MJ, which has been updated to prices in EU27 in 2005 (http://epp.eurostat.ec.europa.eu/tgm/table.do?tab=table&init=1&language=en&pcode=ten00112&plugin=1).
  properties: carbon allocation 0 kg, carbon content 0

## Inputs from technosphere
- natural gas, burned in gas turbine: 0.781488 MJ; = 0.788*(36.0/36.3)
  Based on information from industry experts (German and Swiss data from 2001, ecoinvent report version 2). Value from tab. 7.14 in Faist Emmengger et al. (2007) reintroduced for v3.9 to reflect that the reference product of 'natural gas, burned in gas turbine' was changed back to the fuel input (rather than the output of electricity). The amount is corrected for the difference in NCV (v2: 36.3 vs. v3.9: 36.0 MJ/m3) assumed in the supplying datasets.
- natural gas, high pressure: 0.000231707 m3; = Methane_fossil_amount_1/0.671; lognormal variance with pedigree 0.0419, pedigree (2,3,5,3,1)
  Accounts for input of natural gas lost during transport. Calculated based on leakage rate and gas composition (methane content).
  EcoSpold01Location=NL
  Uncertainty: published data 1994
  properties: carbon content, fossil 0.602381, dry mass 0.84 kg, heating value, net 36 MJ, wet mass 0.84 kg
  note on carbon content, fossil: An average C content of 0.506 kg C/ m3 has been assumed (this average has been calculated using data in Tab 3.5, ecoinvent v2.2 report 6_V
  note on heating value, net: Literature value, Source: Christoph Meili;Niels Jungbluth;Maresa Bussa (2021) Life cycle inventories of crude oil and natural gas extraction. ESU-services Ltd. commissioned by BAFU & VSG, Schaffhausen, Switzerland, http://esu-services.ch/data/public-lci-reports/
- pipeline, natural gas, long distance, low capacity, onshore: 3.57e-9 km; lognormal variance with pedigree 0.3186, pedigree (3,3,4,1,3)
  EcoSpold01Location=GLO
  based on estimated standard capacity
  Uncertainty: based on estimated standard capacity
- waste mineral oil: -1.16e-6 kg; lognormal variance with pedigree 0.0018, pedigree (2,3,1,1,1)
  EcoSpold01Location=CH
  based on dutch data
  Uncertainty: based on dutch data
  production volume
    Calculated from the production volume of transport, pipeline, long distance, natural gas in proportion to the respective output amounts.
  properties: carbon content, fossil 0.864444, dry mass 0.9 kg, heating value, net 34.7 MJ, water content 0.111111, wet mass 1 kg
  note on carbon content, fossil: Tab A.6, ecoinvent v2.2 report 13_I. C content has been calculated after data in the tables, and then referred to 1 kg DM
  note on heating value, net: Value taken from the general comment of the treatment dataset.

## Emissions to nature
- Butane [air, non-urban air or from high stacks]: 2.31707e-7 kg; = 0.00019*0.001/0.82; lognormal variance with pedigree 0.1686, pedigree (2,5,5,1,1)
  calculated based on leakage 0.019% (per 1'000km), gas composition (per m3) and density 0.82 kg / m3 ( used for the conversion in tkm)
  Uncertainty: calculated based on leakage and gas composition
- Carbon dioxide, fossil [air, non-urban air or from high stacks]: 1.85366e-6 kg; = 0.00019*0.008/0.82; lognormal variance with pedigree 0.0492, pedigree (2,5,5,1,1)
  (same comment as for Butane)
- Ethane [air, non-urban air or from high stacks]: 5.32927e-6 kg; = 0.00019*0.023/0.82; lognormal variance with pedigree 0.1686, pedigree (2,5,5,1,1)
  (same comment as for Butane)
- Hydrogen sulfide [air, unspecified]: 4.63415e-10 kg; = 0.00019*2e-6/0.82
  calculated based on leakage 0.019% (per 1'000km), gas composition (per m3) and density 0.82 kg / m3 ( used for the conversion in tkm)
- Mercury II [air, non-urban air or from high stacks]: 2.31707e-12 kg; = 0.00019*1e-8/0.82; lognormal variance with pedigree 0.706025, pedigree (4,5,5,2,1)
  (same comment as for Butane)
- Methane, bromochlorodifluoro-, Halon 1211 [air, non-urban air or from high stacks]: 2.24e-8 kg; lognormal variance with pedigree 0.0492, pedigree (2,3,4,1,1)
  dutch environmental report + qualified estimates
  Uncertainty: dutch environmental report + qualified estimates
- Methane, chlorodifluoro-, HCFC-22 [air, non-urban air or from high stacks]: 6.93e-8 kg; lognormal variance with pedigree 0.0492, pedigree (2,3,4,1,1)
  (same comment as for Methane, bromochlorodifluoro-, Halon 1211)
- Methane, fossil [air, non-urban air or from high stacks]: 0.000155476 kg; name Methane_fossil_amount_1; = 0.00019*0.671/0.82; lognormal variance with pedigree 0.1686, pedigree (2,5,5,1,1)
  (same comment as for Butane)
- Propane [air, non-urban air or from high stacks]: 6.95122e-7 kg; = 0.00019*0.003/0.82; lognormal variance with pedigree 0.1686, pedigree (2,5,5,1,1)
  (same comment as for Butane)

## Sampling procedure
statistics
