# treatment of waste paint, municipal incineration with fly ash extraction

Dataset: EcoSpold 2, unit process
Geography: CH
Time period: 2006-01-01 to 2022-12-31
Technology level: current
Classification: ISIC rev.4 ecoinvent: 3821:Treatment and disposal of non-hazardous waste
Synonyms: municipal waste incineration
Scenario: Business-as-Usual
System model: Allocation at the point of substitution
Share of production covered: 1.8 %
Generated by: Gabor Doka
Published in: Doka G. 2015
Database: ecoinvent
isCopyrightProtected: true

## General comment
This dataset represents the activity of waste disposal of waste paint in a municipal solid waste incinerator (MSWI) // Recommended use of this dataset: For disposal of small amounts of dried paint, which go to disposal as part of a larger, burnable item or in small quantities. Larger amounts of waste paint, unused paint or removed (stripped) paint are to be disposed in hazardous waste incinerator. // // Waste composition (wet, in ppm): upper heating value 10.86 MJ/kg; lower heating value 10.14 MJ/kg; H2O n.a.; O 290300; H 36288; C 651510; S n.a.; N n.a.; P n.a.; B n.a.; Cl 1600; Br n.a.; F n.a.; I n.a.; Ag n.a.; As 2.5; Ba n.a.; Cd 5.0622; Co 388.23; Cr 1040.7; Cu 59; Hg 0.6; Mn n.a.; Mo 38.619; Ni 15; Pb 15246; Sb n.a.; Se n.a.; Sn 256.78; V n.a.; Zn 3251.5; Be n.a.; Sc n.a.; Sr n.a.; Ti n.a.; Tl n.a.; W n.a.; Si n.a.; Fe n.a.; Ca n.a.; Al n.a.; K n.a.; Mg n.a.; Na n.a.; // Share of carbon in waste that is biogenic 0%. // Share of metals in waste not oxidised and bulk-recyclable (exclude very small or thin parts) Iron: 0%; Alu: 0%; Copper: 0%. // Recovery of metal scrap from bottom ash to recycling: 0g iron scrap, 0g aluminium scrap, 0g copper scrap. From this waste, the FLUWA process in the technology mix recovers 0.00119kg (DM) of a hydroxide sludge to be recycled in zinc furnaces. // Ultimately one kg of this waste produces 0.03408 kg of bottom ash (can include some washed ash) and 0.008669 kg of residues, which are landfilled (technology mix). Additional solidification of residues with 0.003467 kg of cement.Net energy production: 1.03MJ/kg electric energy and 2.11MJ/kg thermal energy. //

## Included activities start
waste incineration from waste reception gate and delivery into waste bunker at incinerator plant site (without transports to the incinerator)

## Included activities end
Waste-specific short-term emissions to water from leachate. Long-term emissions from landfill to ground water.

## Geography
Specific to the technology mix encountered in Switzerland in 2012.

## Technology
average Swiss MSWI plants in 2010 (grate incinerators) with electrostatic precipitator for fly ash (ESP), wet flue gas scrubber and 25% SNCR , 42.77% SCR-high dust , 32.68% SCR-low dust -DeNOx facilities and 0% without Denox (weighted according to mass of burnt waste, representing Swiss average). Efficiency of iron scrap separation from slag : 58%. Efficiency of non-ferrous scrap separation from slag : 31%. The technology mix for this dataset includes a filter ash treatment (FLUWA) of a share of 46.22%. Gross electric efficiency technology mix 15.84% and Gross thermal efficiency technology mix 28.51%

## Time period
Waste composition as given in literature reference, theoretical data or other source. Transfer coefficients for modern MSWI.

## Reference product
- heat, for reuse in municipal waste incineration only: 1 MJ; name E_th_prod_MSWI; By-product classification allocatable product; CPC 17300: Steam and hot water; lognormal variance with pedigree 0.025311, pedigree (1,1,1,1,1)
  Net useful heat generated from this waste and used in internal MSWI plant energy redistribution.
  Uncertainty: uncertainty is calculated from uncertainties in waste composition and uncertainties in energy efficiency and the uncertainty in internal energy demand
  production volume 670180 MJ
    calculated in proportion to reference product waste input to incinerator
  property exergy 0.1842 MJ; name E_th_prod_MSWI_exergy
    This exergy property is based on the exergy content of the product.
  property price 0.0106 EUR2005
    Average European district heat price from Ecoheatcool and Euroheat 2005-2006, Ecoheat Work package 1: The European heat market. Final report. 10.6 EUR/GJ i s the price of district heat. http://www.solarthermalworld.org/files/Ecoheatcool%20WP1%20Web.pdf?download
  property true value relation 0.1842; name E_th_prod_MSWI_true_value_relation
    property to calculate "true value" from
  properties: carbon allocation 0 kg, carbon content 0

## Inputs from technosphere
- N-methyl-2-pyrrolidone: 2.71226e-10 kg
- acrylic varnish, with water, in 53% solution state: 6.29601e-7, 5.33018e-7 kg (2 suppliers, which the file names only by identifier); sum of these 1.16262e-6 kg
- alkyd paint, white, without solvent, in 60% solution state: 9.95845e-5, 0.000472701 kg (2 suppliers, which the file names only by identifier); sum of these 0.000572286 kg
- alkyd paint, white, without water, in 60% solution state: 2.60906e-6 kg
- aluminium scrap, post-consumer: -6.79849e-5 kg
- aluminium, cast alloy: 5.1272e-6 kg
- blower and heat exchange unit, central, 600-1200 m3/h: 7.21419e-11 unit
- blower and heat exchange unit, decentralized, 180-250 m3/h: 2.65857e-13 unit
- borax, anhydrous, powder: 1.22332e-7 kg
- cement, unspecified: 0.000143513 kg
- ceramic tile: 1.84184e-5 kg
- chemical factory, organics: 2.92132e-15 unit
- chemical, organic: 1.45763e-8 kg
- clay brick: 0.000135504 kg
- compressed air, 1000 kPa gauge: 5.09307e-8 m3
- concrete, normal strength: 4.60966e-7, 2.61216e-6 m3 (2 suppliers, which the file names only by identifier); sum of these 3.07313e-6 m3
- containerboard, fluting medium: 0.000434165 kg
- containerboard, linerboard: 0.000533569 kg
- copper, cathode: 7.63137e-7 kg
- cyclic N-compound: 3.84144e-9 kg
- dichloromethane: 7.49102e-11 kg
- diesel, burned in building machine: 0.00011355 MJ
- diesel, low-sulfur: 2.02117e-7 kg
- diethylene glycol: 1.04722e-9 kg
- door, inner, glass-wood: 1.29745e-11 m2
- door, inner, wood: 7.18291e-8 m2
- door, outer, wood-aluminium: 1.31699e-8 m2
- door, outer, wood-glass: 9.71607e-9 m2
- electricity, low voltage: 4.53558e-7, 3.26718e-6 kWh (2 suppliers, which the file names only by identifier); sum of these 3.72074e-6 kWh
- electricity, medium voltage: 0.00012719, 0.000111895 kWh (2 suppliers, which the file names only by identifier); sum of these 0.000239085 kWh
- elevator, hydraulic: 4.15813e-10 unit
- energy and auxilliary inputs, metal working factory: 9.19282e-14, 2.04998e-14 kg (2 suppliers, which the file names only by identifier); sum of these 1.12428e-13 kg
- ethylene vinyl acetate copolymer: 5.67971e-7 kg
- excavation, hydraulic digger: 9.705e-8 m3
- flat glass, coated: 3.50863e-5 kg
- flat glass, uncoated: 4.34383e-6, 2.10941e-5 kg (2 suppliers, which the file names only by identifier); sum of these 2.54379e-5 kg
- glass wool mat: 5.16753e-6 kg
- glued laminated timber, MUF-glue: 1.10529e-10 m3
- glued laminated timber, PUR-glue: 1.10529e-10 m3
- glycerine: 1.22817e-9 kg
- gravel, crushed: 2.54756e-6 kg
- gypsum plasterboard: 5.94968e-5 kg
- hard coal: 4.69617e-7 kg
- heat, district or industrial, natural gas: 2.2776e-5 MJ
- heavy fuel oil: 3.18131e-7 kg
- inert waste: -2.10699e-5 kg
- light fuel oil: 2.87165e-7 kg
- lime, hydrated, packed: 1.08549e-7 kg
- liquefied petroleum gas: 6.68753e-7, 3.40114e-9 kg (2 suppliers, which the file names only by identifier); sum of these 6.72154e-7 kg
- maize starch: 1.11934e-5 kg
- metal working factory: 1.12428e-13 unit
- monoethanolamine: 1.77515e-9 kg
- municipal solid waste: -1.7476e-8 kg
- natural gas, high pressure: 1.80191e-5, 1.29109e-7 m3 (2 suppliers, which the file names only by identifier); sum of these 1.81482e-5 m3
- natural stone plate, cut: 1.07835e-7 kg
- nitrogen, liquid: 2.84129e-9 kg
- packaging box factory: 1.24829e-12 unit
- packaging film, low density polyethylene: 1.01537e-6 kg
- paper, woodcontaining, supercalendered: 6.43543e-8 kg
- plywood: 2.10593e-7 m3
- polyol: 5.25968e-6 kg
- polyvinylchloride, bulk polymerised: 9.57379e-6 kg
- potato starch: 2.03596e-6 kg
- printing ink, offset, without solvent, in 47.5% solution state: 1.59032e-6 kg
- reinforcing steel: 0.00185355 kg
- sand: 7.92572e-6, 4.11466e-8, 9.48965e-8, 0.000515773 kg (4 suppliers, which the file names only by identifier); sum of these 0.000523835 kg
- sanitary ceramics: 2.54372e-6 kg
- sawnwood, beam, softwood, dried (u=10%), planed: 3.65918e-10 m3
- sawnwood, beam, softwood, raw, dried (u=10%): 1.86548e-8 m3
- sawnwood, softwood, raw, dried (u=20%): 1.81969e-9 m3
- scrap aluminium: -1.21037e-7, -5.67876e-9, -2.54853e-7 kg (3 suppliers, which the file names only by identifier); sum of these -3.81569e-7 kg
- scrap copper: -2.3977e-8, -5.11043e-7, -1.07605e-6 kg (3 suppliers, which the file names only by identifier); sum of these -1.61107e-6 kg
- scrap steel: -5.6241e-8, -0.000137858, -4.43904e-5 kg (3 suppliers, which the file names only by identifier); sum of these -0.000182305 kg
- silicon, metallurgical grade: 5.34656e-8 kg
- sludge from pulp and paper production: -1.59932e-8, -1.44325e-6 kg (2 suppliers, which the file names only by identifier); sum of these -1.45925e-6 kg
- sodium hydroxide, without water, in 50% solution state: 3.4952e-7 kg
- spent solvent mixture: -1.90313e-12, -8.12317e-11 kg (2 suppliers, which the file names only by identifier); sum of these -8.31348e-11 kg
- steel, low-alloyed: 0.000183782 kg
- steel, low-alloyed, hot rolled: 4.98244e-7 kg
- stone wool: 1.57706e-10 kg
- styrene-acrylonitrile copolymer: 4.32003e-8 kg
- tap water: 0.000244683, 0.000243359, 0.0018151 kg (3 suppliers, which the file names only by identifier); sum of these 0.00230314 kg
- toluene diisocyanate: 2.21497e-6 kg
- triphenyl phosphate: 5.75078e-9 kg
- unreinforced concrete, 15MPa: 8.82211e-9 m3
- urea: 1.48734e-9 kg
- used door, inner, glass-wood: -1.29745e-11 m2
- used door, inner, wood: -7.18291e-8 m2
- used door, outer, wood-aluminium: -1.31699e-8 m2
- used door, outer, wood-glass: -9.71607e-9 m2
- used window frame, wood: -1.59196e-7 m2
- used window frame, wood-metal: -3.61989e-8 m2
- waste cement, hydrated: -0.000143513 kg
- waste concrete: -0.00744955 kg
- waste concrete gravel: -2.54756e-6 kg
- waste foundry sand: -0.000469983 kg
- waste glass: -7.84415e-8, -1.87894e-7, -3.60044e-5, -1.75303e-8, -3.8724e-6, -1.651e-6, -1.92122e-5, -4.26269e-9 kg (8 suppliers, which the file names only by identifier); sum of these -6.10281e-5 kg
- waste gypsum plasterboard: -5.94968e-5 kg
- waste mineral oil: -6.33278e-10, -2.55807e-8 kg (2 suppliers, which the file names only by identifier); sum of these -2.6214e-8 kg
- waste mineral wool: -3.29642e-6, -1.55825e-8, -1.35177e-6 kg (3 suppliers, which the file names only by identifier); sum of these -4.66377e-6 kg
- waste paint: -0.000538741, -1.60302e-7, -5.34192e-5 kg (3 suppliers, which the file names only by identifier); sum of these -0.00059232 kg
- waste paint on wall: -3.23866e-6 kg
- waste paint on wood: -8.24925e-9 kg
- waste paper, unsorted: -5.32881e-9, -5.32881e-9 kg (2 suppliers, which the file names only by identifier); sum of these -1.06576e-8 kg
- waste plastic, mixture: -6.86028e-8 kg
- waste polyurethane: -2.19823e-8 kg
- waste polyvinylchloride: -2.85522e-10, -1.48074e-9, -2.16286e-6, -1.55935e-9, -3.77533e-9, -6.95931e-6, -4.89704e-8, -3.95554e-7 kg (8 suppliers, which the file names only by identifier); sum of these -9.57379e-6 kg
- waste reinforced concrete: -1.98143e-5 kg
- waste wood, untreated: -1.59728e-7, -0.000178451, -2.96724e-6 kg (3 suppliers, which the file names only by identifier); sum of these -0.000181578 kg
- wastewater, average: -1.01917e-13, -2.05846e-6, -4.05537e-12 m3 (3 suppliers, which the file names only by identifier); sum of these -2.05846e-6 m3
- water, deionised: 5.45334e-10, 1.51492e-7 kg (2 suppliers, which the file names only by identifier); sum of these 1.52037e-7 kg
- window frame, aluminium, U=1.6 W/m2K: 1.24761e-6 m2
- window frame, wood, U=1.5 W/m2K: 1.59196e-7 m2
- window frame, wood-metal, U=1.6 W/m2K: 3.61989e-8 m2
- wood chips, dry, measured as dry mass: 7.06751e-7 kg
- zinc: 8.4793e-7 kg

## Inputs from nature
- Occupation, industrial area [natural resource, land]: 1.941e-6 m2*year
- Occupation, urban, continuously built [natural resource, land]: 5.76707e-5 m2*year
- Oxygen [natural resource, in air]: 3.25257e-5 kg
- Transformation, from heterogeneous, agricultural [natural resource, land]: 2.00635e-7 m2
- Transformation, from unspecified [natural resource, land]: 2.42625e-8 m2
- Transformation, from urban, continuously built [natural resource, land]: 2.86082e-7 m2
- Transformation, from urban, green area [natural resource, land]: 2.82225e-7 m2
- Transformation, to industrial area [natural resource, land]: 2.42625e-8 m2
- Transformation, to urban, continuously built [natural resource, land]: 7.68942e-7 m2
- Water, cooling, unspecified natural origin [natural resource, in water]: 8.93446e-14 m3
- Water, river [natural resource, in water]: 8.06518e-8 m3
- Water, well, in ground [natural resource, in water]: 9.69919e-8 m3

## Emissions to nature
- Acetaldehyde [air, unspecified]: 3.26214e-12 kg
- Acetic acid [air, unspecified]: 1.18504e-10 kg
- Acetone [air, unspecified]: 1.93746e-12 kg
- Ammonia [air, unspecified]: 1.98827e-11 kg
- Arsenic ion [air, unspecified]: 5.09153e-13 kg
- Benzene [air, unspecified]: 3.10958e-10 kg
- Benzene, ethyl- [air, unspecified]: 2.88354e-13 kg
- Benzene, hexachloro- [air, unspecified]: 6.9205e-20 kg
- Benzo(a)pyrene [air, unspecified]: 1.32656e-14 kg
- Bromine [air, unspecified]: 7.0097e-13 kg
- Butane [air, unspecified]: 5.23416e-10 kg
- Cadmium II [air, unspecified]: 2.74386e-14 kg
- Calcium [air, unspecified]: 7.41657e-11 kg
- Carbon dioxide, fossil [air, unspecified]: 4.38778e-5 kg
- Carbon dioxide, fossil [air, urban air close to ground]: 2.21761e-7 kg
- Carbon dioxide, non-fossil [air, unspecified]: 1.02846e-6 kg
- Carbon monoxide, fossil [air, unspecified]: 2.6214e-9 kg
- Carbon monoxide, non-fossil [air, unspecified]: 2.88354e-9 kg
- Chlorine [air, unspecified]: 1.73013e-12 kg
- Chromium III [air, unspecified]: 3.96925e-13 kg
- Chromium VI [air, unspecified]: 3.747e-14 kg
- Cobalt II [air, unspecified]: 4.67662e-13 kg
- Copper ion [air, unspecified]: 1.52197e-11 kg
- Dinitrogen monoxide [air, unspecified]: 1.31885e-10 kg
- Dioxins, measured as 2,3,7,8-tetrachlorodibenzo-p-dioxin [air, unspecified]: 5.97461e-19 kg
- Ethanol [air, unspecified]: 3.87493e-12 kg
- Fluorine [air, unspecified]: 4.8059e-13 kg
- Formaldehyde [air, unspecified]: 1.00698e-10 kg
- Hydrocarbons, aliphatic, alkanes, unspecified [air, unspecified]: 3.3051e-11 kg
- Hydrocarbons, aliphatic, unsaturated [air, unspecified]: 3.6738e-11 kg
- Hydrocarbons, aromatic [air, unspecified]: 2.56249e-12 kg
- Hydrochloric acid [air, unspecified]: 5.51424e-10 kg
- Hydrogen fluoride [air, unspecified]: 1.73233e-11 kg
- Iron ion [air, unspecified]: 6.85279e-11 kg
- Lead II [air, unspecified]: 3.10675e-12 kg
- Magnesium [air, unspecified]: 5.31388e-11 kg
- Manganese II [air, unspecified]: 1.92369e-12 kg
- Mercury II [air, unspecified]: 7.46152e-14 kg
- Methane, fossil [air, unspecified]: 1.66738e-9 kg
- Methane, non-fossil [air, unspecified]: 2.88354e-11 kg
- Methanol [air, unspecified]: 6.58737e-12 kg
- Molybdenum VI [air, unspecified]: 1.65462e-13 kg
- NMVOC, non-methane volatile organic compounds [air, non-urban air or from high stacks]: 0.000443251 kg
- NMVOC, non-methane volatile organic compounds [air, unspecified]: 8.00147e-9 kg
- Nickel II [air, unspecified]: 6.63576e-12 kg
- Nitrogen oxides [air, unspecified]: 1.7476e-8 kg
- PAH, polycyclic aromatic hydrocarbons [air, unspecified]: 7.50988e-12 kg
- Particulate Matter, < 2.5 um [air, non-urban air or from high stacks]: 2.87252e-8 kg
- Particulate Matter, < 2.5 um [air, unspecified]: 8.73801e-10 kg
- Particulate Matter, > 10 um [air, non-urban air or from high stacks]: 1.09102e-6 kg
- Particulate Matter, > 10 um [air, unspecified]: 2.6214e-10 kg
- Particulate Matter, > 2.5 um and < 10um [air, non-urban air or from high stacks]: 3.48482e-7 kg
- Particulate Matter, > 2.5 um and < 10um [air, unspecified]: 3.49798e-10 kg
- Pentane [air, unspecified]: 8.90409e-10 kg
- Phenol, pentachloro- [air, unspecified]: 7.78557e-17 kg
- Potassium I [air, unspecified]: 2.41432e-10 kg
- Propane [air, unspecified]: 1.61586e-10 kg
- Propionic acid [air, unspecified]: 1.47672e-11 kg
- Selenium IV [air, unspecified]: 2.79259e-13 kg
- Sodium [air, unspecified]: 3.04668e-11 kg
- Sulfur dioxide [air, unspecified]: 1.3049e-8 kg
- Sulfur oxides [air, unspecified]: 1.3107e-8 kg
- Toluene [air, unspecified]: 1.52879e-10 kg
- Vanadium V [air, unspecified]: 1.34132e-11 kg
- Water [air, unspecified]: 2.44053e-7 m3
- Zinc II [air, unspecified]: 1.82194e-11 kg
- m-Xylene [air, unspecified]: 1.15342e-12 kg
- Hydrocarbons, unspecified [soil, unspecified]: 3.14976e-5 kg
- BOD5, Biological Oxygen Demand [water, unspecified]: 2.6214e-9 kg
- COD, Chemical Oxygen Demand [water, unspecified]: 8.73801e-9 kg
- DOC, Dissolved Organic Carbon [water, unspecified]: 3.2363e-9 kg
- Hydrocarbons, unspecified [water, unspecified]: 3.14976e-5 kg
- Nitrogen [water, unspecified]: 3.23306e-9 kg
- Phosphorus [water, unspecified]: 3.23306e-9 kg
- Solids, inorganic [water, unspecified]: 5.23835e-5 kg
- TOC, Total Organic Carbon [water, unspecified]: 3.2363e-9 kg
- Water [water, unspecified]: 1.78255e-7 m3
