# drying of feed grain

Dataset: EcoSpold 2, unit process
Geography: CA-QC
Time period: 1985-01-01 to 2022-12-31
Technology level: current
Classification: ISIC rev.4 ecoinvent: 0163:Post-harvest crop activities
Classification: EcoSpold01Categories: agricultural means of production/work processes
Scenario: Business-as-Usual
System model: Allocation at the point of substitution
Generated by: François Saunier
Database: ecoinvent
isCopyrightProtected: true

## General comment
The functional unit is kg water evaporated. This module should be used when evaluating drying of cereals and maize grains used as feedstuff.
Dataset based on GLO parent dataset. The only differences with the parent dataset are (1) the production volume, which now represents the production volume in Quebec; (2) Data Quality Pedigree indicators which was modified to account for the fact that GLO data is used to represent Quebec activities; (3) the geographical location and (4) energy demand which has been adapted acordingly to Quebec specificity.
[This dataset was already contained in the ecoinvent database version 2. It was not individually updated during the transfer to ecoinvent version 3. Life Cycle Impact Assessment results may still have changed, as they are affected by changes in the supply chain, i.e. in other datasets. This dataset was generated following the ecoinvent quality guidelines for version 2. It may have been subject to central changes described in the ecoinvent version 3 change report (http://www.ecoinvent.org/database/ecoinvent-version-3/reports-of-changes/), and the results of the central updates were reviewed extensively. The changes added e.g. consistent water flows and other information throughout the database. The documentation of this dataset can be found in the ecoinvent reports of version 2, which are still available via the ecoinvent website. The change report linked above covers all central changes that were made during the conversion process.]

## Included activities start
From reception of grains, at the silo gate. Drying process starting from grains, wet (low moisture content).

## Included activities end
This activity ends with dried grains at silo gate.
The dataset includes the energy demand (supplied by consumption of electricity) for evaporating 1 kg of water, when drying grain at low moisture content at ambiant air. Also included in the inventory is the infrastructure (building and machinery) and land use.
The dataset does not include waste and air emissions (like dust).Production of the wet educt and utilisation of the dried product are not included.

## Geography
The inventories are based on Quebec technical data (for energy consumption) and indications made by drying plants in Switzerland and values given in international references (Western Europe) (for parent data).

## Technology
Drying at farm, in silo, at ambiant air temperature of grains for animal feed (barley, oat wheat, canola and soybeans). Silo average capacity is 240 tonnes.
This technology is used when grains can be harvest at low moisture content (e.g. about 18%), hence avoiding the need of hot air drying. Ambiant air drying in silo lasts 15 days. Afterwards, grains are stored in a ventilated silo for 4 days. Dust and particulate emission to air are not considered.
References :
BEAUREGARD, G. (2013). Production budget of agricultural productions in Quebec. Technical report for CIRAIG.
CRAAQ (2010). Séchage des grains - Données techniques. AGDEX 736, juin 2010, 6p. [Centre de Référence en Agriculture et Agroalimentaire du Québec]

## Time period
Time of publication in literature and annual reports for parent data. Most publications between 2001 and 2002.

Electricity consumption is based on a 2010 report from the CRAAQ and might be representative of more recent time period than the GLO parent dataset.

## Parameters
- quebec cropped area: 1.87476e6 ha; name qc_crop_area; lognormal variance with pedigree 0.0006, pedigree (1,1,1,1,1)
  Land in crops, Quebec, in 2011. Source: Statistics Canada, 2013. Table 004-0002 - Census of Agriculture, total area of farms and use of farm land, CANSIM (database). (accessed: 2013-11-15) ("Land in crops" includes field crops, vegetables, fruits and nursery crops, and sod.) Statistics Canada
- world arable land area: 1.39628e9 ha; name world_arable_area; lognormal variance with pedigree 0.0006, pedigree (1,1,1,1,1)
  Arable land area, World, in 2011. Source: FAOSTAT, 2013

## Reference product
- drying of feed grain: 1 l; By-product classification allocatable product; CPC 86111: Post-harvest crop services
  production volume 0.00537073 l
    Gross approximation of Quebec production volume using relative value of Quebec cropped area to world arable area.
  property price 0.175512 EUR2005
    Calculated based on inputs: The price of the product has been calculated as a sum of the values of the material and energy inputs for this product. This value is therefore a rough estimation. It may underestimate the real price since there are additional expenses when producing any product. These expences can include for example labour costs, treatment of waste materials and profit for the producer. Please consider carefully whether this level of data quality is acceptable for your application.
  properties: carbon allocation 0 kg, carbon content 0

## Inputs from technosphere
- building, hall: 8.52e-5 m2; lognormal variance with pedigree 0.4641, pedigree (3,2,5,5,5)
  This data has been copied from the original GLO dataset. The uncertainty has been adjusted accordingly.
  Uncertainty: T
- cast iron: 0.00583 kg; lognormal variance with pedigree 0.478, pedigree (4,5,5,5,5)
  (same comment as for building, hall)
  properties: carbon content, fossil 0.04, dry mass 1 kg, wet mass 1 kg
  note on carbon content, fossil: Cast iron is made by remelting pig iron in small furnaces (e.g. cupola furnaces or electric arc furnaces) and poured into moulds to make castings. It usually contains 2% to 6% carbon (ecoinvent v2.2 report 10_partII). An average content of 4% was considered
- electricity, low voltage: 0.1515 kWh; source CRAAQ 2010; lognormal variance with pedigree 0.052, pedigree (1,2,5,1,1)
  Literature value. Electricity is used for operating the fan and for the mixing of grains in the silo. (230V)

## Inputs from nature
- Occupation, construction site [natural resource, land]: 0.0375 m2*year; lognormal variance with pedigree 0.2041, pedigree (3,2,5,5,5)
  (same comment as for building, hall)
- Occupation, industrial area [natural resource, land]: 0.625 m2*year; lognormal variance with pedigree 0.2041, pedigree (3,2,5,5,5)
  (same comment as for building, hall)
- Transformation, from pasture, man made [natural resource, land]: 0.00025 m2; lognormal variance with pedigree 0.2841, pedigree (3,2,5,5,5)
  (same comment as for building, hall)
- Transformation, to industrial area [natural resource, land]: 0.00025 m2; lognormal variance with pedigree 0.2841, pedigree (3,2,5,5,5)
  (same comment as for building, hall)

## Extrapolations
Dataset based on GLO parent dataset.Infrastructure and land occupation data are kept from parent dataset and may not be representative of the geography and the technology. The uncertainty has been adjusted accordingly.
