# treatment of steel in car shredder residue, municipal incineration

Dataset: EcoSpold 2, unit process
Geography: CH
Time period: 1994-01-01 to 2022-12-31
Technology level: outdated
Classification: ISIC rev.4 ecoinvent: 3821:Treatment and disposal of non-hazardous waste
Classification: EcoSpold01Categories: waste management/municipal incineration
Synonyms: metal parts in Automotive Shredder Residue ASR; Metallteile in RESH aus Automobilen
Tags: ConvertedDataset; Treatment
Scenario: Business-as-Usual
System model: Allocation at the point of substitution
Generated by: Gabor Doka (obsolete)
Published in: Doka G. 2007
Database: ecoinvent
isCopyrightProtected: true

## General comment
Inventoried waste contains 50% Fe in ASR burnable; 50% Fe in ASR inert; .
waste composition (wet, in ppm): H2O n.a.; O 121260; H n.a.; C n.a.; S 760; N n.a.; P 800; B n.a.; Cl 750; Br n.a.; F n.a.; I n.a.; Ag n.a.; As n.a.; Ba n.a.; Cd 3; Co n.a.; Cr 1200; Cu 13570; Hg n.a.; Mn 2400; Mo n.a.; Ni 1050; Pb 380; Sb 210; Se n.a.; Sn 670; V 250; Zn 202; Be n.a.; Sc n.a.; Sr n.a.; Ti n.a.; Tl n.a.; W n.a.; Si 30950; Fe 815330; Ca n.a.; Al 10220; K n.a.; Mg n.a.; Na n.a.;
Share of carbon in waste that is biogenic 60.4%.
Share of iron in waste that is metallic/recyclable 50%.
Net energy produced in MSWI: 0MJ/kg waste electric energy and 0MJ/kg waste thermal energy
Allocation of energy production: no substitution or expansion. Total burden allocated to waste disposal function of MSWI.
One kg of this waste produces 0.81 kg of slag and 0.066 kg of residues, which are landfilled. Additional solidification with 0.0264 kg of cement.
[This dataset was already contained in the ecoinvent database version 2. It was not individually updated during the transfer to ecoinvent version 3. Life Cycle Impact Assessment results may still have changed, as they are affected by changes in the supply chain, i.e. in other datasets. This dataset was generated following the ecoinvent quality guidelines for version 2. It may have been subject to central changes described in the ecoinvent version 3 change report (http://www.ecoinvent.org/database/ecoinvent-version-3/reports-of-changes/), and the results of the central updates were reviewed extensively. The changes added e.g. consistent water flows and other information throughout the database. The documentation of this dataset can be found in the ecoinvent reports of version 2, which are still available via the ecoinvent website. The change report linked above covers all central changes that were made during the conversion process.]

## Included activities end
waste-specific air and water emisions from incineration, auxiliary material consumption for flue gas cleaning. Short-term emissions to river water and long-term emisisons to ground water from slag compartment (from bottom slag) and residual material landfill (from solidified fly ashes and scrubber slugde). Process energy demands for MSWI.

## Geography
Specific to the technology mix encountered in Switzerland in 2000. Well applicable to modern incineration practices in Europe, North America or Japan.

## Technology
replaced by newer incineration technology with fly ash extraction. Average Swiss MSWI plants in 2000 with electrostatic precipitator for fly ash (ESP), wet flue gas scrubber and 29.4% SNCR , 32.2% SCR-high dust , 24.6% SCR-low dust -DeNOx facilities and 13.8% without Denox (by burnt waste, according to Swiss average). Share of waste incinerated in plants with magnetic scrap separation from slag : 50%. Gross electric efficiency technology mix 12.997% and Gross thermal efficiency technology mix 25.57%

## Time period
Waste composition as given in literature reference, theoretical data or other source. Transfer coefficients for modern Swiss MSWI. Emission speciation based on early 90ies data.

## Reference product
- steel in car shredder residue: -1 kg; By-product classification Waste; CPC 39310: Slag, dross, scalings and other waste from the manufacture of iron or steel; CAS 7439-89-6
  EcoSpold01Location=CH
  production volume 0 kg
    outdated. Replaced by newer incineration technology with fly ash extraction.
  property price 0 EUR2005
    Waste products are assigned a price of zero as they are assumed to require further treatment.
  properties: carbon allocation 0 kg, carbon content 0, carbon content, fossil 0, carbon content, non-fossil 0, dry mass 1 kg, water content 0, water in wet mass 0 kg, wet mass 1 kg

## Inputs from technosphere
- cement, unspecified: 0.0264 kg; lognormal variance with pedigree 0.06, pedigree (1,1,5,1,1)
  Cement for solidification of landfilled residual material. Uncertainty calculated from unertainty of the waste composition of this waste, of transfer coefficients in the incinerator and of the solidification recipe.
  EcoSpold01Location=CH
  properties: dry mass 1 kg, wet mass 1 kg
- chemical, inorganic: 1.12e-5 kg; lognormal variance with pedigree 0.08, pedigree (1,1,5,1,1)
  EcoSpold01Location=GLO
  Proxy for Polyelectrolyte. uncertainty calculated from uncertainty in average auxiliary material input, and the unertainty of the waste composition of this waste
  properties: carbon content, fossil 0.003, dry mass 1 kg, wet mass 1 kg
  note on carbon content, fossil: This dataset is an unweighted average of 20 inorganic substances (listed in Tab 88.1, ecoinvent v2.2 report 8, part II), being part of the top100 chemicals included in this database. The C-content has also been calculated as an unweighted average of the C content of the substances composing this dataset.
- chemical, organic: 5.97e-6 kg; lognormal variance with pedigree 1.48, pedigree (1,1,5,1,1)
  EcoSpold01Location=GLO
  Proxy for TMT15. uncertainty calculated from uncertainty in average auxiliary material input, and the unertainty of the waste composition of this waste
  properties: carbon content, fossil 0.628, dry mass 1 kg, heating value, net 19.03 MJ, wet mass 1 kg
  note on carbon content, fossil: This dataset is an unweighted average of 20 organic substances (listed in Tab 88.1, ecoinvent v2.2 report 8, part II), being part of the top100 chemicals included in this database. The C-content has also been calculated as an unweighted average of the C content of the substances composing this dataset.
- electricity, for reuse in municipal waste incineration only: 0.152 kWh; name E_el_prod_MSWI; lognormal variance with pedigree 0.54, pedigree (1,1,5,1,1)
  uncertainty is calculated from uncertainties in waste composition and uncertainties in energy efficiency and the uncertainty in internal energy demand
- heat, for reuse in municipal waste incineration only: 0.839 MJ; name E_th_prod_MSWI; lognormal variance with pedigree 0.04, pedigree (1,1,5,1,1)
  (same comment as for electricity, for reuse in municipal waste incineration only)
- hydrochloric acid, without water, in 30% solution state: 6.73e-6 kg; lognormal variance with pedigree 0.08, pedigree (1,1,5,1,1)
  EcoSpold01Location=RER
  uncertainty calculated from uncertainty in average auxiliary material input, and the unertainty of the waste composition of this waste
  properties: dry mass 1 kg, heating value, net 3.32 MJ, wet mass 1 kg
- iron (III) chloride, without water, in 40% solution state: 0.000124 kg; lognormal variance with pedigree 0.18, pedigree (1,1,5,1,1)
  uncertainty calculated from uncertainty in average auxiliary material input, and the unertainty of the waste composition of this waste
  EcoSpold01Location=CH
  properties: dry mass 1 kg, wet mass 1 kg
- municipal waste incineration facility: 2.5e-10 unit; lognormal variance with pedigree 0.04, pedigree (1,1,5,1,1)
  EcoSpold01Location=CH
  demands per kilogram waste. uncertainty is heeded in the module
- process-specific burdens, municipal waste incineration: 1 kg; lognormal variance with pedigree 0.04, pedigree (1,1,5,1,1)
  EcoSpold01Location=CH
  demands per kilogram waste. uncertainty is heeded in the module;activityLink introduced to establish a direct link to the corresponding regional supply of this product
- process-specific burdens, residual material landfill: 0.066 kg; lognormal variance with pedigree 0.05, pedigree (1,1,5,1,1)
  uncertainty is calculated from uncertainties in waste composition and transfer coefficients in incinerator;activityLink introduced to establish a direct link to the corresponding regional supply of this product
  EcoSpold01Location=CH
- process-specific burdens, slag landfill: 0.81 kg; lognormal variance with pedigree 0.05, pedigree (1,1,5,1,1)
  (same comment as for process-specific burdens, residual material landfill)
- quicklime, milled, packed: 6.48e-5 kg; lognormal variance with pedigree 0.74, pedigree (1,1,5,1,1)
  EcoSpold01Location=CH
  uncertainty calculated from uncertainty in average auxiliary material input, and the unertainty of the waste composition of this waste
  properties: dry mass 0.99 kg, water content 0.010101, wet mass 1 kg
- residual material landfill: 1.37e-10 unit; lognormal variance with pedigree 0.05, pedigree (1,1,5,1,1)
  uncertainty is calculated from uncertainties in waste composition and transfer coefficients in incinerator
  EcoSpold01Location=CH
- slag landfill: 1.44e-9 unit; lognormal variance with pedigree 0.05, pedigree (1,1,5,1,1)
  EcoSpold01Location=CH
  uncertainty is calculated from uncertainties in waste composition and transfer coefficients in incinerator
- sodium hydroxide, without water, in 50% solution state: 0.000505 kg; lognormal variance with pedigree 0.51, pedigree (1,1,5,1,1)
  (same comment as for hydrochloric acid, without water, in 30% solution state)
  properties: dry mass 1 kg, heating value, net 3.03 MJ, wet mass 1 kg
- waste cement, hydrated: -0.066 kg; name BP_amount_1; lognormal variance with pedigree 0.02, pedigree (1,1,1,1,1)
  EcoSpold01Location=CH
  Hydrated cement for solidification of landfilled residual material. Uncertainty calculated from unertainty of the waste composition of this waste and transfer coefficients in the incinerator and of the solidification recipe.
  production volume
    Calculated from the production volume of steel in car shredder residue, 0% water in proportion to the respective output amounts.
  properties: dry mass 1 kg, wet mass 1 kg

## Emissions to nature
- Aluminium III [air, urban air close to ground]: 7.98e-6 kg; lognormal variance with pedigree 0.43, pedigree (1,1,5,1,1)
  uncertainty is calculated from uncertainties in waste composition and transfer coefficients in incinerator
- Antimony ion [air, urban air close to ground]: 4.08e-13 kg; lognormal variance with pedigree 1.03, pedigree (1,1,5,1,1)
  (same comment as for Aluminium III)
- Cadmium II [air, urban air close to ground]: 8.26e-11 kg; lognormal variance with pedigree 1.51, pedigree (1,1,5,1,1)
  (same comment as for Aluminium III)
- Carbon monoxide, fossil [air, urban air close to ground]: 8.82e-5 kg; lognormal variance with pedigree 0.690625, pedigree (1,3,5,2,1)
  Literature data from switzerland and germany adapted to plant age distribution in switzerland
  Uncertainty: & basic uncertainty of 5; literature data from switzerland and germany adapted to plant age distribution in switzerland
- Carbon monoxide, non-fossil [air, urban air close to ground]: 0.000135 kg; lognormal variance with pedigree 0.690625, pedigree (1,3,5,2,1)
  (same comment as for Carbon monoxide, fossil)
- Chromium III [air, urban air close to ground]: 4.44e-11 kg; lognormal variance with pedigree 0.78, pedigree (1,1,5,1,1)
  (same comment as for Aluminium III)
- Copper ion [air, urban air close to ground]: 5.01e-8 kg; lognormal variance with pedigree 0.43, pedigree (1,1,5,1,1)
  (same comment as for Aluminium III)
- Hydrochloric acid [air, urban air close to ground]: 4.16e-9 kg; lognormal variance with pedigree 0.79, pedigree (1,1,5,1,1)
  (same comment as for Aluminium III)
- Iron ion [air, urban air close to ground]: 1.36e-5 kg; lognormal variance with pedigree 0.09, pedigree (1,1,5,1,1)
  (same comment as for Aluminium III)
- Lead II [air, urban air close to ground]: 7.05e-9 kg; lognormal variance with pedigree 0.87, pedigree (1,1,5,1,1)
  (same comment as for Aluminium III)
- Manganese II [air, urban air close to ground]: 6.53e-12 kg; lognormal variance with pedigree 0.71, pedigree (1,1,5,1,1)
  (same comment as for Aluminium III)
- Methane, fossil [air, urban air close to ground]: 2.53e-6 kg; lognormal variance with pedigree 0.091225, pedigree (2,3,5,2,1)
  Confidential data from 5 plants in Switzerland and Germany
  Uncertainty: & basic uncertainty of 1.5; confidential data from 5 plants in Switzerland and Germany
- Methane, non-fossil [air, urban air close to ground]: 3.86e-6 kg; lognormal variance with pedigree 0.091225, pedigree (2,3,5,2,1)
  (same comment as for Methane, fossil)
- Nickel II [air, urban air close to ground]: 2.27e-11 kg; lognormal variance with pedigree 0.8, pedigree (1,1,5,1,1)
  (same comment as for Aluminium III)
- Phosphorus [air, urban air close to ground]: 4e-7 kg; lognormal variance with pedigree 0.75, pedigree (1,1,5,1,1)
  (same comment as for Aluminium III)
- Silicon [air, urban air close to ground]: 3.6e-5 kg; lognormal variance with pedigree 0.3, pedigree (1,1,5,1,1)
  (same comment as for Aluminium III)
- Sulfur dioxide [air, urban air close to ground]: 1.62e-6 kg; lognormal variance with pedigree 0.75, pedigree (1,1,5,1,1)
  (same comment as for Aluminium III)
- Tin ion [air, urban air close to ground]: 4.44e-7 kg; lognormal variance with pedigree 0.77, pedigree (1,1,5,1,1)
  (same comment as for Aluminium III)
- Vanadium V [air, urban air close to ground]: 1.25e-8 kg; lognormal variance with pedigree 0.92, pedigree (1,1,5,1,1)
  (same comment as for Aluminium III)
- Zinc II [air, urban air close to ground]: 1.65e-9 kg; lognormal variance with pedigree 0.96, pedigree (1,1,5,1,1)
  (same comment as for Aluminium III)
- Aluminium III [water, ground-, long-term]: 0.00796 kg; lognormal variance with pedigree 0.4, pedigree (1,1,5,1,1)
  Long-term emissions from landfilling of incineration residues. uncertainty is calculated from uncertainties in waste composition and transfer coefficients in incinerator and landfills.
- Aluminium III [water, surface water]: 4.92e-7 kg; lognormal variance with pedigree 0.82, pedigree (1,1,5,1,1)
  uncertainty is calculated from uncertainties in waste composition and transfer coefficients in incinerator and landfills
- Antimony ion [water, ground-, long-term]: 8.23e-5 kg; lognormal variance with pedigree 0.69, pedigree (1,1,5,1,1)
  (same comment as for Aluminium III)
- Antimony ion [water, surface water]: 3.65e-5 kg; lognormal variance with pedigree 0.75, pedigree (1,1,5,1,1)
  (same comment as for Aluminium III)
- Cadmium II [water, ground-, long-term]: 1.51e-6 kg; lognormal variance with pedigree 3.02, pedigree (1,1,5,1,1)
  (same comment as for Aluminium III)
- Cadmium II [water, surface water]: 1.45e-9 kg; lognormal variance with pedigree 1.52, pedigree (1,1,5,1,1)
  (same comment as for Aluminium III)
- Chloride [water, ground-, long-term]: 5.99e-5 kg; lognormal variance with pedigree 0.68, pedigree (1,1,5,1,1)
  (same comment as for Aluminium III)
- Chloride [water, surface water]: 0.00069 kg; lognormal variance with pedigree 0.44, pedigree (1,1,5,1,1)
  (same comment as for Aluminium III)
- Chromium III [water, surface water]: 1.91e-6 kg; lognormal variance with pedigree 0.69, pedigree (1,1,5,1,1)
  (same comment as for Aluminium III)
- Chromium VI [water, ground-, long-term]: 6.74e-5 kg; lognormal variance with pedigree 2.03, pedigree (1,1,5,1,1)
  (same comment as for Aluminium III)
- Chromium VI [water, surface water]: 1.96e-5 kg; lognormal variance with pedigree 0.69, pedigree (1,1,5,1,1)
  (same comment as for Aluminium III)
- Copper ion [water, ground-, long-term]: 0.0123 kg; lognormal variance with pedigree 0.37, pedigree (1,1,5,1,1)
  (same comment as for Aluminium III)
- Copper ion [water, surface water]: 5.11e-7 kg; lognormal variance with pedigree 1.23, pedigree (1,1,5,1,1)
  (same comment as for Aluminium III)
- Iron ion [water, ground-, long-term]: 0.302 kg; lognormal variance with pedigree 0.51, pedigree (1,1,5,1,1)
  (same comment as for Aluminium III)
- Iron ion [water, surface water]: 0.000141 kg; lognormal variance with pedigree 0.08, pedigree (1,1,5,1,1)
  (same comment as for Aluminium III)
- Lead II [water, ground-, long-term]: 0.000204 kg; lognormal variance with pedigree 3.49, pedigree (1,1,5,1,1)
  (same comment as for Aluminium III)
- Lead II [water, surface water]: 8.76e-9 kg; lognormal variance with pedigree 1.13, pedigree (1,1,5,1,1)
  (same comment as for Aluminium III)
- Manganese II [water, ground-, long-term]: 0.00223 kg; lognormal variance with pedigree 0.61, pedigree (1,1,5,1,1)
  (same comment as for Aluminium III)
- Manganese II [water, surface water]: 1.29e-7 kg; lognormal variance with pedigree 1.5, pedigree (1,1,5,1,1)
  (same comment as for Aluminium III)
- Nickel II [water, ground-, long-term]: 0.00102 kg; lognormal variance with pedigree 0.67, pedigree (1,1,5,1,1)
  (same comment as for Aluminium III)
- Nickel II [water, surface water]: 6.6e-7 kg; lognormal variance with pedigree 1.34, pedigree (1,1,5,1,1)
  (same comment as for Aluminium III)
- Phosphate [water, ground-, long-term]: 6.3e-5 kg; lognormal variance with pedigree 5.18, pedigree (1,1,5,1,1)
  (same comment as for Aluminium III)
- Phosphate [water, surface water]: 1.05e-7 kg; lognormal variance with pedigree 1.18, pedigree (1,1,5,1,1)
  (same comment as for Aluminium III)
- Silicon [water, ground-, long-term]: 0.00148 kg; lognormal variance with pedigree 5.48, pedigree (1,1,5,1,1)
  (same comment as for Aluminium III)
- Silicon [water, surface water]: 3.85e-6 kg; lognormal variance with pedigree 0.61, pedigree (1,1,5,1,1)
  (same comment as for Aluminium III)
- Sulfate [water, ground-, long-term]: 0.00199 kg; lognormal variance with pedigree 0.57, pedigree (1,1,5,1,1)
  (same comment as for Aluminium III)
- Sulfate [water, surface water]: 0.000288 kg; lognormal variance with pedigree 0.46, pedigree (1,1,5,1,1)
  (same comment as for Aluminium III)
- Tin ion [water, ground-, long-term]: 0.000502 kg; lognormal variance with pedigree 0.79, pedigree (1,1,5,1,1)
  (same comment as for Aluminium III)
- Tin ion [water, surface water]: 1.78e-8 kg; lognormal variance with pedigree 1.15, pedigree (1,1,5,1,1)
  (same comment as for Aluminium III)
- Vanadium V [water, ground-, long-term]: 3.37e-5 kg; lognormal variance with pedigree 1.9, pedigree (1,1,5,1,1)
  (same comment as for Aluminium III)
- Vanadium V [water, surface water]: 1.4e-7 kg; lognormal variance with pedigree 1.31, pedigree (1,1,5,1,1)
  (same comment as for Aluminium III)
- Zinc II [water, ground-, long-term]: 0.000103 kg; lognormal variance with pedigree 1.68, pedigree (1,1,5,1,1)
  (same comment as for Aluminium III)
- Zinc II [water, surface water]: 2.16e-8 kg; lognormal variance with pedigree 0.74, pedigree (1,1,5,1,1)
  (same comment as for Aluminium III)

## Sampling procedure
waste-specific calculation based on literature data

## Extrapolations
Typical elemental transfer coefficients from current studies for modern MSWI, completed with data from coal power plants and estimates, adapted for inert/burnable waste.

## Review by Niels Jungbluth 2003-07-15
Passed. Calculation for standard deviation 95 of, i.e., infrastructure,
land occupation, transport services or other services can differ from
standard Pedigree approach used in this project and figures obtained by
this procedure.
