# lentil production

Dataset: EcoSpold 2, unit process
Geography: CA-AB
Time period: 2017-01-01 to 2022-12-31
Technology level: current
Classification: ISIC rev.4 ecoinvent: 0111:Growing of cereals (except rice), leguminous crops and oil seeds
Scenario: Business-as-Usual
System model: Allocation at the point of substitution
Generated by: Davoud Heidari
Published in: Food Systems PRISM Lab 2020
Database: ecoinvent
isCopyrightProtected: true

## General comment
This dataset represents the production of 1 tonne of dried lentil product with a dry matter of 84% at minimum during May-August, 2019, at 12441.26 ha lentil farms located in the Province of Alberta, Canada. Farms have yield of 1619.12 kg dried matter per ha for this crop cycle. The system boundaries include the production of all of crop inputs (e.g. seeds, fertilizers, crop protection products, and fuel). There is an estimated 0.65 kg of N fixation per tonne of lentils produced in this region that can be included as an avoided use of N fertilizer for the next crop in the rotation. However, this was not included in this model due to data presentation restrictions. Irrigation is not included since it is rarely performed for lentils in this region. Sowing date for the crop is May, 2019 and harvesting date is August, 2020. Seeding rate is 0.07 kg/tonne of lentil production. Fertilizer applied contain nitrogen (as N) 5.40 kg/tonne, phosphate (as P2O5) 20.63 kg/tonne, potash (as K2O) 1.22 kg/tonne, and sulfur (as S) 2.45 kg/tonne. Predominant crop protection applied contain active ingredients of Glyphosate 608.23 g/tonne, Sethoxydim 35.13 g/tonne, and Pyraclostrobin 14.71 g/tonne. Machinery is used for tillage (disk), land rolling, seeding, tillage (cultivator), swathing, harrowing, fertilizer application, in-crop herbicide application, foliar fungicide application, foliar insecticide application, combining, post-harvest herbicide application, and burndown/desiccant application with total fuel consumption of 12.06 kg/tonne.

## Included activities start
Starting inputs for this activity include seed, fertilizer, crop protection products and fuel on the farm. This activity begins with soil preparation about 37 weeks after the harvest of the previous crop. The soil is prepared for cultivation in 1st week of May and sowing of seeds started about 5 days after soil preparation.

## Included activities end
This activity ends with lentil drying to <16% moisture at farm gate. Carbon and nitrogen emissions associated with above- and below-ground biomass are accounted for using the DNDC model. This model was also used to calculate a nitrogen fixation credit that can be included as an avoided use of N fertilizer for the next crop in the rotation. However, this was not included in this model due to data presentation restrictions. For lentils in this region, the N credit was estimated to be 0.65 kg/t.

## Geography
Refers to weighted-average production in the Province of Alberta, Canada

## Technology
Production of lentil includes farm practices from tillage (disk), land rolling, seeding, tillage (cultivator), swathing, harrowing, fertilizer application, in-crop herbicide application, foliar fungicide application, foliar insecticide application, combining, post-harvest herbicide application, burndown/desiccant application, to drying.

## Time period
Soil cultivating date for the main crop: April - May 2019; Harvesting date main crop: August, 2017-2019. The soil cultivation, sowing and harvesting dates are the data collected by the farmers. Total time from date of sowing to date of harvesting comes to 119 days. The data is collected for three crop cycles. The cycle of one year is considered for entry in ecoinvent.

## Parameters
- LUC_crop_specific: 1 dimensionless
- yield kgha: 1619.12 kg/ha

## Reference product
- lentil: 1 kg; By-product classification allocatable product; CPC 01709: Pulses, n.e.c.
  production volume 20143.9 kg
    Production volume for dry lentil is provided in kg. Data is for the year 2017-2019.
  property price 0.521542 EUR2005
    Literature value. Price from FAOSTAT data Producer Prices - Annual (retrieved from: http://www.fao.org/faostat/en/#data/PP, accessed 15Feb2018). Data from 2005.
  properties: carbon allocation 0.435765 kg, carbon content 0.475, carbon content, fossil 0, carbon content, non-fossil 0.475, dry mass 0.9174 kg, water content 0.0900371, water in wet mass 0.0826 kg, wet mass 1 kg

## Inputs from technosphere
- ammonium sulfate: 2.34363e-5 kg; lognormal variance with pedigree 0.002, pedigree (2,3,2,1,1)
  This refers to production of ammonium sulphate (as N).
  Uncertainty: D
  properties: dry mass 1 kg, wet mass 1 kg
- application of plant protection product, by field sprayer: 1.52469e-5 ha; lognormal variance with pedigree 0.0008, pedigree (1,1,2,1,1)
  This refers to application of plant protection product, by field sprayer.
- combine harvesting: 0.00024661 ha; lognormal variance with pedigree 0.0008, pedigree (1,1,2,1,1)
  This refers to combine harvesting.
- diammonium phosphate: 0.000586926 kg; lognormal variance with pedigree 0.002, pedigree (2,3,2,1,1)
  This refers to production of diammonium phosphate (DAP) (as N), and diammonium phosphate (DAP) (as P2O5).
  Uncertainty: D
  properties: dry mass 1 kg, nitrogen content 0.18, phosphorus content 0.200754, wet mass 1 kg
  note on nitrogen content: Nitrogen content (on a dry matter basis) of diammonium phosphate is calculated from the molecular formula of the nutrient present in the substance.
  note on phosphorus content: Phosphorus content (on a dry matter basis) of diammonium phosphate is calculated from the molecular formula of the nutrient present in the substance.
- drying of lentils: 0.0244 l; lognormal variance with pedigree 0.0008, pedigree (1,1,2,1,1)
  This refers to drying of lentils.
- fertilising, by broadcaster: 0.000204073 ha; lognormal variance with pedigree 0.0008, pedigree (1,1,2,1,1)
  This refers to fertilising, by broadcaster.
- glyphosate: 0.00064 kg; lognormal variance with pedigree 0.0014, pedigree (1,3,2,1,1)
  This refers to production of glyphosate.
  Uncertainty: D
  properties: carbon content, fossil 0.214286, dry mass 1 kg, wet mass 1 kg
- land use change, annual crop: 0.000528682 ha; = (0.8560*LUC_crop_specific+0.0000*(1-LUC_crop_specific))/yield_kg_ha; lognormal variance with pedigree 0.212, pedigree (5,5,5,5,5)
  Calculated value. Land use change (LUC) combines land transformation areas calculated with the adapted 'Direct Land Use Change Assessment Tool' version 2014 developed by Blonk Consultants and the carbon losses from soil organic carbon (SOC) and vegetation (VEG) as calculated in ecoinvent v3. See 'WFLDB-Guidelines.pdf', available at <https://ecoquery.ecoinvent.org/File/Reports>.
  Uncertainty: D
- lentil seed, for sowing: 6.61e-5 kg; lognormal variance with pedigree 0.0014, pedigree (1,3,2,1,1)
  This refers to production of lentil seed.
  Uncertainty: D
  properties: carbon content, non-fossil 0.475, dry mass 0.9174 kg, water content 0.0900371, wet mass 1 kg
- monoammonium phosphate: 0.0254238 kg; lognormal variance with pedigree 0.002, pedigree (2,3,2,1,1)
  This refers to production of Ammonium Polyphosphate (liquid) (as N), MIcroEssentials S10 (as N), MicroEssentials S15 (as N), Monoammonium Phosphate (MAP) (as N), Ammonium Polyphosphate (liquid) (as P2O5), MIcroEssentials S10 (as P2O5), MicroEssentials S15 (as P2O5), and Monoammonium Phosphate (MAP) (as P2O5).
  Uncertainty: D
  properties: dry mass 1 kg, nitrogen content 0.084, phosphorus content 0.226939, wet mass 1 kg
  note on nitrogen content: Nitrogen content (on a dry matter basis) of monoammonium phosphate is calculated from the molecular formula of the nutrient present in the substance.
  note on phosphorus content: Phosphorus content (on a dry matter basis) of monoammonium phosphate is calculated from the molecular formula of the nutrient present in the substance.
- peat moss: 7.07062e-6 m3; = 0.001463618/207
  Peat moss is used as a proxy to model the used inoculum. The amount is calculated by dividing the peat moss mass by its density (207 kg/m3).
  properties: heating value, net 17.88 MJ
- pesticide, unspecified: 0.000116382 kg; lognormal variance with pedigree 0.002, pedigree (1,3,2,1,2)
  This refers to production of herbicides (except glyphosate), fungicides and insecticides.
  Uncertainty: D
  properties: carbon content, fossil 0.486978, dry mass 1 kg, wet mass 1 kg
- potassium chloride: 0.00121869 kg; lognormal variance with pedigree 0.002, pedigree (2,3,2,1,1)
  This refers to production of Potash (as K2O).
  Uncertainty: D
  properties: dry mass 1 kg, wet mass 1 kg
- sowing: 9.26575e-5 ha; lognormal variance with pedigree 0.0008, pedigree (1,1,2,1,1)
  This refers to sowing.
- sulfur: 0.00244585 kg; lognormal variance with pedigree 0.002, pedigree (2,3,2,1,1)
  This refers to production of MIcroEssentials S10 (as S), MicroEssentials S15 - S, and Tiger 90.
  Uncertainty: D
  properties: dry mass 1 kg, wet mass 1 kg
- swath, by rotary windrower: 4.69586e-5 ha; lognormal variance with pedigree 0.0008, pedigree (1,1,2,1,1)
  This refers to swath, by rotary windrower.
- tillage, cultivating, chiselling: 0.00308749 ha; lognormal variance with pedigree 0.0008, pedigree (1,1,2,1,1)
  This refers to tillage, cultivating, chiselling.
- tillage, harrowing, by offset disc harrow: 0.00101333 ha; lognormal variance with pedigree 0.0008, pedigree (1,1,2,1,1)
  This refers to tillage, harrowing, by offset disk harrow.
- tillage, harrowing, by rotary harrow: 0.000709383 ha; lognormal variance with pedigree 0.0008, pedigree (1,1,2,1,1)
  This refers to tillage, harrowing, by rotary harrow.
- tillage, rolling: 0.000244661 ha; lognormal variance with pedigree 0.0008, pedigree (1,1,2,1,1)
  This refers to tillage, rolling.
- tillage, rotary cultivator: 0.00050858 ha; lognormal variance with pedigree 0.0008, pedigree (1,1,2,1,1)
  This refers to tillage, rotary cultivator.

## Inputs from nature
- Occupation, annual crop, non-irrigated [natural resource, land]: 6.1762 m2*year; lognormal variance with pedigree 0.0022, pedigree (1,1,2,1,1)
  Uncertainty: D
- Transformation, from unspecified [natural resource, land]: 6.1762 m2; lognormal variance with pedigree 0.0082, pedigree (1,1,2,1,1)
  Uncertainty: D
- Transformation, to annual crop, non-irrigated [natural resource, land]: 6.1762 m2; lognormal variance with pedigree 0.0082, pedigree (1,1,2,1,1)
  Uncertainty: D

## Emissions to nature
- Ammonia [air, low population density, long-term]: 0.000213 kg; lognormal variance with pedigree 0.0108, pedigree (3,3,2,1,1)
  Modelled with using the DeNitrification DeComposition (DNDC) -Management Factor Tool (DNDC-MFT) that was developed by Smith et al, (2010). The Canadian version of DNDC that has been used in this study was developed to include a crop growth model for cultivars grown in Canada as well as the impact of snow dynamics, crop biomass, and residue management on soil temperature (Dutta et al, 2016). (References: Dutta B, Smith WN, Grant BB, et al (2016) Model development in DNDC for the prediction of evapotranspiration and water use in temperate field cropping systems. Environ Model Softw 80:. https://doi.org/10.1016/j.envsoft.2016.02.014
  Uncertainty: D
- Carbon dioxide, fossil [air, low population density, long-term]: 0.00041 kg; lognormal variance with pedigree 0.0008, pedigree (1,1,2,1,1)
  (same comment as for Ammonia)
- Carfentrazone-ethyl [air, non-urban air or from high stacks]: 3.09e-7 kg; lognormal variance with pedigree 0.0408, pedigree (1,3,2,1,1)
  Modelled, farm-level emissions from plant protection product application were modelled based on the active ingredients for each substance. As per Margni et al. (2002), it was assumed that, regardless of the timing of the products, 76.5% of the active ingredient of each agricultural plant protection product is emitted to soil, 8.5% to water, and 10% to air. This means a total of 95% of the applied active ingredient is emitted back to the environment. The last 5% is taken up by the plant and was therefore not considered as an emission in this model. (Reference: Margni M, Rossier D, Crettaz P, Jolliet O (2002) Life cycle impact assessment of pesticides on human health and ecosystems. Agric Ecosyst Environ 93:379–392. https://doi.org/10.1016/S0167-8809(01)00336-X)
  Uncertainty: D
- Clethodim [air, non-urban air or from high stacks]: 4.11e-7 kg; lognormal variance with pedigree 0.0408, pedigree (1,3,2,1,1)
  (same comment as for Carfentrazone-ethyl)
- Dinitrogen monoxide [air, low population density, long-term]: 7.47e-5 kg; lognormal variance with pedigree 0.0328, pedigree (3,3,2,1,1)
  (same comment as for Ammonia)
- Fludioxonil [air, low population density, long-term]: 7.78e-8 kg; lognormal variance with pedigree 0.0408, pedigree (1,3,2,1,1)
  (same comment as for Carfentrazone-ethyl)
- Flumioxazin [air, non-urban air or from high stacks]: 4.59e-7 kg; lognormal variance with pedigree 0.0408, pedigree (1,3,2,1,1)
  (same comment as for Carfentrazone-ethyl)
- Glyphosate [air, non-urban air or from high stacks]: 6.4e-5 kg; lognormal variance with pedigree 0.0408, pedigree (1,3,2,1,1)
  (same comment as for Carfentrazone-ethyl)
- Imazamox [air, non-urban air or from high stacks]: 6.08e-7 kg; lognormal variance with pedigree 0.0408, pedigree (1,3,2,1,1)
  (same comment as for Carfentrazone-ethyl)
- Imazethapyr [air, non-urban air or from high stacks]: 1.79e-7 kg; lognormal variance with pedigree 0.0408, pedigree (1,3,2,1,1)
  (same comment as for Carfentrazone-ethyl)
- Metalaxyl-M [air, low population density, long-term]: 1.79e-7 kg; lognormal variance with pedigree 0.0408, pedigree (1,3,2,1,1)
  (same comment as for Carfentrazone-ethyl)
- Nitrogen oxides [air, low population density, long-term]: 1.7e-5 kg; lognormal variance with pedigree 0.0328, pedigree (3,3,2,1,1)
  (same comment as for Ammonia)
- Pyraclostrobin [air, non-urban air or from high stacks]: 1.55e-6 kg; lognormal variance with pedigree 0.0408, pedigree (1,3,2,1,1)
  (same comment as for Carfentrazone-ethyl)
- Sethoxydim [air, non-urban air or from high stacks]: 3.7e-6 kg; lognormal variance with pedigree 0.0408, pedigree (1,3,2,1,1)
  (same comment as for Carfentrazone-ethyl)
- Cadmium II [soil, agricultural]: 4.1118e-7 kg; lognormal variance with pedigree 0.0419915, pedigree (2,2,2,1,1)
  The heavy metal emissions are calculated by SALCA-heavy metal (Freiermuth 2006) using the ecoinvent LCI calculation tool for crop production.
  Uncertainty: C
- Carfentrazone-ethyl [soil, agricultural]: 2.37e-6 kg; lognormal variance with pedigree 0.0338, pedigree (1,3,2,1,1)
  (same comment as for Carfentrazone-ethyl)
- Chromium III [soil, agricultural]: -2.87325e-5 kg
  The heavy metal emissions are calculated by SALCA-heavy metal (Freiermuth 2006) using the ecoinvent LCI calculation tool for crop production.
- Clethodim [soil, agricultural]: 3.14e-6 kg; lognormal variance with pedigree 0.0338, pedigree (1,3,2,1,1)
  (same comment as for Carfentrazone-ethyl)
- Copper ion [soil, agricultural]: -2.35914e-5 kg
  (same comment as for Chromium III)
- Ethaboxam [soil, agricultural]: 1.86e-6 kg; lognormal variance with pedigree 0.0338, pedigree (1,3,2,1,1)
  (same comment as for Carfentrazone-ethyl)
- Fludioxonil [soil, agricultural]: 5.95e-7 kg; lognormal variance with pedigree 0.0338, pedigree (1,3,2,1,1)
  (same comment as for Carfentrazone-ethyl)
- Flumioxazin [soil, agricultural]: 3.51e-6 kg; lognormal variance with pedigree 0.0338, pedigree (1,3,2,1,1)
  (same comment as for Carfentrazone-ethyl)
- Fluxapyroxad [soil, agricultural]: 4.23e-6 kg; lognormal variance with pedigree 0.0338, pedigree (1,3,2,1,1)
  (same comment as for Carfentrazone-ethyl)
- Glyphosate [soil, agricultural]: 0.00049 kg; lognormal variance with pedigree 0.0338, pedigree (1,3,2,1,1)
  (same comment as for Carfentrazone-ethyl)
- Imazamox [soil, agricultural]: 4.65e-6 kg; lognormal variance with pedigree 0.0338, pedigree (1,3,2,1,1)
  (same comment as for Carfentrazone-ethyl)
- Imazethapyr [soil, agricultural]: 1.37e-6 kg; lognormal variance with pedigree 0.0338, pedigree (1,3,2,1,1)
  (same comment as for Carfentrazone-ethyl)
- Lead II [soil, agricultural]: -2.68786e-6 kg
  (same comment as for Chromium III)
- Mercury II [soil, agricultural]: -6.3586e-8 kg
  (same comment as for Chromium III)
- Metalaxyl-M [soil, agricultural]: 1.37e-6 kg; lognormal variance with pedigree 0.0338, pedigree (1,3,2,1,1)
  (same comment as for Carfentrazone-ethyl)
- Nickel II [soil, agricultural]: -1.23104e-5 kg
  (same comment as for Chromium III)
- Nitrate [soil, unspecified]: 3.51e-5 kg; lognormal variance with pedigree 0.0358, pedigree (3,3,2,1,1)
  (same comment as for Ammonia)
- Phosphorus [soil, agricultural]: 0.00017 kg; lognormal variance with pedigree 0.0358, pedigree (3,3,2,1,1)
  (same comment as for Ammonia)
- Pyraclostrobin [soil, agricultural]: 1.18e-5 kg; lognormal variance with pedigree 0.0338, pedigree (1,3,2,1,1)
  (same comment as for Carfentrazone-ethyl)
- Sedaxane [soil, agricultural]: 1.14e-6 kg; lognormal variance with pedigree 0.0338, pedigree (1,3,2,1,1)
  (same comment as for Carfentrazone-ethyl)
- Sethoxydim [soil, agricultural]: 2.83e-5 kg; lognormal variance with pedigree 0.0338, pedigree (1,3,2,1,1)
  (same comment as for Carfentrazone-ethyl)
- Zinc II [soil, agricultural]: -4.62663e-5 kg
  (same comment as for Chromium III)
- Cadmium II [water, ground-]: 2.19632e-8 kg; lognormal variance with pedigree 0.0872596, pedigree (2,2,2,1,1)
  (same comment as for Cadmium II)
- Cadmium II [water, surface water]: 2.30734e-7 kg; lognormal variance with pedigree 0.0872596, pedigree (2,2,2,1,1)
  (same comment as for Cadmium II)
- Carfentrazone-ethyl [water, ground-]: 2.63e-7 kg; lognormal variance with pedigree 0.0408, pedigree (1,3,2,1,1)
  (same comment as for Carfentrazone-ethyl)
- Chromium III [water, ground-]: 1.10571e-5 kg; lognormal variance with pedigree 0.0872596, pedigree (2,2,2,1,1)
  (same comment as for Cadmium II)
- Chromium III [water, surface water]: 2.75105e-5 kg; lognormal variance with pedigree 0.0872596, pedigree (2,2,2,1,1)
  (same comment as for Cadmium II)
- Clethodim [water, ground-]: 3.49e-7 kg; lognormal variance with pedigree 0.0408, pedigree (1,3,2,1,1)
  (same comment as for Carfentrazone-ethyl)
- Copper ion [water, ground-]: 1.46672e-6 kg; lognormal variance with pedigree 0.0872596, pedigree (2,2,2,1,1)
  (same comment as for Cadmium II)
- Copper ion [water, surface water]: 1.79232e-5 kg; lognormal variance with pedigree 0.0872596, pedigree (2,2,2,1,1)
  (same comment as for Cadmium II)
- Ethaboxam [water, ground-]: 2.07e-7 kg; lognormal variance with pedigree 0.0408, pedigree (1,3,2,1,1)
  (same comment as for Carfentrazone-ethyl)
- Fludioxonil [water, ground-]: 6.61e-8 kg; lognormal variance with pedigree 0.0408, pedigree (1,3,2,1,1)
  (same comment as for Carfentrazone-ethyl)
- Flumioxazin [water, ground-]: 3.9e-7 kg; lognormal variance with pedigree 0.0408, pedigree (1,3,2,1,1)
  (same comment as for Carfentrazone-ethyl)
- Fluxapyroxad [water, ground-]: 4.7e-7 kg; lognormal variance with pedigree 0.0408, pedigree (1,3,2,1,1)
  (same comment as for Carfentrazone-ethyl)
- Glyphosate [water, ground-]: 5.44e-5 kg; lognormal variance with pedigree 0.0408, pedigree (1,3,2,1,1)
  (same comment as for Carfentrazone-ethyl)
- Imazamox [water, ground-]: 5.17e-7 kg; lognormal variance with pedigree 0.0408, pedigree (1,3,2,1,1)
  (same comment as for Carfentrazone-ethyl)
- Imazethapyr [water, ground-]: 1.52e-7 kg; lognormal variance with pedigree 0.0408, pedigree (1,3,2,1,1)
  (same comment as for Carfentrazone-ethyl)
- Lead II [water, ground-]: 3.16429e-8 kg; lognormal variance with pedigree 0.0872596, pedigree (2,2,2,1,1)
  (same comment as for Cadmium II)
- Lead II [water, surface water]: 2.25079e-6 kg; lognormal variance with pedigree 0.0872596, pedigree (2,2,2,1,1)
  (same comment as for Cadmium II)
- Mercury II [water, ground-]: 2.45689e-10 kg; lognormal variance with pedigree 0.0872596, pedigree (2,2,2,1,1)
  (same comment as for Cadmium II)
- Mercury II [water, surface water]: 3.01953e-8 kg; lognormal variance with pedigree 0.0872596, pedigree (2,2,2,1,1)
  (same comment as for Cadmium II)
- Metalaxyl-M [water, ground-]: 1.52e-7 kg; lognormal variance with pedigree 0.0408, pedigree (1,3,2,1,1)
  (same comment as for Carfentrazone-ethyl)
- Nickel II [water, surface water]: 1.22077e-5 kg; lognormal variance with pedigree 0.0872596, pedigree (2,2,2,1,1)
  (same comment as for Cadmium II)
- Phosphorus [water, ground-]: 0.000448 kg; lognormal variance with pedigree 0.0428, pedigree (3,3,2,1,1)
  (same comment as for Ammonia)
- Pyraclostrobin [water, ground-]: 1.32e-6 kg; lognormal variance with pedigree 0.0408, pedigree (1,3,2,1,1)
  (same comment as for Carfentrazone-ethyl)
- Sedaxane [water, ground-]: 1.27e-7 kg; lognormal variance with pedigree 0.0408, pedigree (1,3,2,1,1)
  (same comment as for Carfentrazone-ethyl)
- Sethoxydim [water, ground-]: 3.14e-6 kg; lognormal variance with pedigree 0.0408, pedigree (1,3,2,1,1)
  (same comment as for Carfentrazone-ethyl)
- Zinc II [water, ground-]: 4.91523e-6 kg; lognormal variance with pedigree 0.0872596, pedigree (2,2,2,1,1)
  (same comment as for Cadmium II)
- Zinc II [water, surface water]: 1.61691e-5 kg; lognormal variance with pedigree 0.0872596, pedigree (2,2,2,1,1)
  (same comment as for Cadmium II)

## Sampling procedure
Site-specific field data were collected via survey from prairie province lentil producers for crop rotation, seeding rate, machinery and fuel use for field operations (e.g., tillage, harrowing, harvest), farm inputs (e.g., fertilizers, pesticides), and electricity for crop drying. Production weighted averages were calculated for the region. Outliers were removed from reported fuel use data based on visual inspection.

## Extrapolations
Geographical location of each farm was used to identify the Reconciliation Units (soil and climate based provincial divisions) identified by Agriculture and Agri-Food Canada (AAFC) and AAFC Reporting Zone (ecozone) to which each farm belongs. Production-weighted average datasets were calculated for each ecozone.

## Review by Jens Lansche 2021-02-02
All comments from the previous reviews have been taken into account in the current version.
