# treatment of scrap steel, municipal incineration with fly ash extraction

Dataset: EcoSpold 2, unit process
Geography: CH
Time period: 2006-01-01 to 2022-12-31
Technology level: current
Classification: ISIC rev.4 ecoinvent: 3821:Treatment and disposal of non-hazardous waste
Synonyms: municipal waste incineration
Scenario: Business-as-Usual
System model: Allocation at the point of substitution
Share of production covered: 1.8 %
Generated by: Gabor Doka
Published in: Doka G. 2015
Database: ecoinvent
isCopyrightProtected: true

## General comment
This dataset represents the activity of waste disposal of scrap steel in a municipal solid waste incinerator (MSWI) // Recommended use of this dataset: For disposal of bulky, non-dust steel which goes to incineration as part of a larger item or in small amounts only. Pure, isolated steel fractions will not be disposed in incinerators, but rather go to recycling. // // Waste composition (wet, in ppm): H2O n.a.; O 121260; H n.a.; C n.a.; S 760; N n.a.; P 800; B n.a.; Cl 750; Br n.a.; F n.a.; I n.a.; Ag n.a.; As n.a.; Ba n.a.; Cd 3; Co n.a.; Cr 1200; Cu 13570; Hg n.a.; Mn 2400; Mo n.a.; Ni 1050; Pb 380; Sb 210; Se n.a.; Sn 670; V 250; Zn 202; Be n.a.; Sc n.a.; Sr n.a.; Ti n.a.; Tl n.a.; W n.a.; Si 30950; Fe 815330; Ca n.a.; Al 10220; K n.a.; Mg n.a.; Na n.a.; // Share of carbon in waste that is biogenic 60.4%. // Share of metals in waste not oxidised and bulk-recyclable (exclude very small or thin parts) Iron: 100%; Alu: 0%; Copper: 0%. // Recovery of metal scrap from bottom ash to recycling: 472.89g iron scrap, 0g aluminium scrap, 0g copper scrap.Ultimately one kg of this waste produces 0.6607 kg of bottom ash (can include some washed ash) and 0 kg of residues, which are landfilled (technology mix). Net energy production: 0MJ/kg electric energy and 0MJ/kg thermal energy. //

## Included activities start
waste incineration from waste reception gate and delivery into waste bunker at incinerator plant site (without transports to the incinerator)

## Included activities end
Waste-specific short-term emissions to water from leachate. Long-term emissions from landfill to ground water.

## Geography
Specific to the technology mix encountered in Switzerland in 2012.

## Technology
average Swiss MSWI plants in 2010 (grate incinerators) with electrostatic precipitator for fly ash (ESP), wet flue gas scrubber and 25% SNCR , 42.77% SCR-high dust , 32.68% SCR-low dust -DeNOx facilities and 0% without Denox (weighted according to mass of burnt waste, representing Swiss average). Efficiency of iron scrap separation from slag : 58%. Efficiency of non-ferrous scrap separation from slag : 31%. The technology mix for this dataset includes a filter ash treatment (FLUWA) of a share of 46.22%. Gross electric efficiency technology mix 15.84% and Gross thermal efficiency technology mix 28.51%

## Time period
Waste composition as given in literature reference, theoretical data or other source. Transfer coefficients for modern MSWI.

## Reference product
- iron scrap, sorted, pressed: 1 kg; By-product classification Recyclable; CPC 39310: Slag, dross, scalings and other waste from the manufacture of iron or steel; lognormal variance with pedigree 0.0104, pedigree (1,1,1,1,1)
  Iron scrap recovered from this waste.
  Uncertainty: uncertainty calculated from uncertainty in waste composition, uncertainty of share of recyclable metal, uncertainty of transfer coefficient to bottom ash, uncertainty of the efficiency of scrap removal in MSWI plant.
  production volume 2.2861e7 kg
    calculated in proportion to reference product waste input to incinerator
  property price 0.175 EUR2005
    Temporary price data. Calculated as 90% of purchasers price based on: 2005 import and export prices (total trades (USD) divided by total weight (kg) in biggest economies of the world: EU27, USA, Brasil, China, India, Japan and Russia) from UN Commodity Trade Statistics Database (http://data.un.org/Explorer.aspxDatabase [Accessed 2011.06.20]). Commodity: Waste or scrap, of cast iron
  properties: carbon allocation 0 kg, carbon content 0, carbon content, fossil 0, carbon content, non-fossil 0, dry mass 1 kg, water content 0, water in wet mass 0 kg, wet mass 1 kg

## Inputs from technosphere
- 1,1-difluoroethane, HFC-152a: 7.92832e-7 kg
- 1-butanol: 2.15598e-9 kg
- EDTA, ethylenediaminetetraacetic acid: 1.98635e-7 kg
- acetic acid, without water, in 98% solution state: 5.94168e-6 kg
- acetylene: 2.58051e-8, 1.225e-7 kg (2 suppliers, which the file names only by identifier); sum of these 1.48305e-7 kg
- acrylic dispersion, with water, in 58% solution state: 1.47807e-9 kg
- acrylic varnish, with water, in 53% solution state: 4.85651e-10 kg
- acrylonitrile-butadiene-styrene copolymer: 7.55683e-5 kg
- activated bentonite: 0.00179472 kg
- activated carbon, granular: 2.61732e-8 kg
- activated silica: 5.11789e-8 kg
- air compressor, screw-type compressor, 300kW: 7.09102e-11 unit
- air compressor, screw-type compressor, 4kW: 5.04207e-10 unit
- alkyd paint, white, without solvent, in 60% solution state: 1.80472e-5, 8.09206e-5 kg (2 suppliers, which the file names only by identifier); sum of these 9.89678e-5 kg
- alkyd paint, white, without water, in 60% solution state: 2.09322e-8, 9.93677e-8 kg (2 suppliers, which the file names only by identifier); sum of these 1.203e-7 kg
- alkylketene dimer sizing agent, for paper production: 7.97076e-7 kg
- aluminium casting facility: 5.4343e-16 unit
- aluminium electrolysis facility: 5.78086e-16 unit
- aluminium fluoride: 6.19982e-8 kg
- aluminium hydroxide: 1.6563e-9 kg
- aluminium oxide factory: 1.1217e-12 unit
- aluminium oxide, metallurgical: 7.21057e-6 kg
- aluminium oxide, non-metallurgical: 2.78512e-7, 1.64508e-6 kg (2 suppliers, which the file names only by identifier); sum of these 1.92359e-6 kg
- aluminium scrap, new: -2.25085e-8, -2.25085e-8 kg (2 suppliers, which the file names only by identifier); sum of these -4.50169e-8 kg
- aluminium scrap, post-consumer: -9.27084e-6 kg
- aluminium scrap, post-consumer, prepared for melting: -6.27772e-9 kg
- aluminium sulfate, powder: 0.00018519 kg
- aluminium, cast alloy: 5.6136e-5 kg
- aluminium, primary, ingot: 5.62256e-6, 1.02092e-6, 5.92803e-7 kg (3 suppliers, which the file names only by identifier); sum of these 7.23629e-6 kg
- aluminium, wrought alloy: 5.23515e-5 kg
- ammonia, anhydrous, liquid: 4.20891e-8 kg
- ammonium bicarbonate: 4.99546e-7 kg
- anode factory: 2.09631e-14 unit
- anode, prebake, for aluminium electrolysis: 1.72843e-6 kg
- asbestos, crysotile type: 8.91372e-5 kg
- ash from paper production sludge: -3.21037e-8, -1.22817e-6 kg (2 suppliers, which the file names only by identifier); sum of these -1.26028e-6 kg
- average incineration residue: -1.8858e-7, -1.60073e-9 kg (2 suppliers, which the file names only by identifier); sum of these -1.9018e-7 kg
- bark: -2.77666e-6 kg
- basic oxygen furnace dust: -2.79672e-7 kg
- basic oxygen furnace secondary metallurgy slag: -4.33725e-9 kg
- basic oxygen furnace slag: -1.51252e-6 kg
- basic oxygen furnace sludge: -4.33725e-9 kg
- battery, Li-ion, LiMn2O4, rechargeable, prismatic: 4.56568e-8 kg
- bentonite: 3.64121e-6 kg
- benzene: 1.54883e-7 kg
- biowaste: -2.09933e-6 kg
- bitumen adhesive compound, hot: 0.0402299 kg
- blast oxygen furnace converter: 1.92249e-16 unit
- blasting: 1.5105e-9 kg
- blower and heat exchange unit, central, 600-1200 m3/h: 1.8944e-12 unit
- brass: 3.59036e-7, 3.92795e-9 kg (2 suppliers, which the file names only by identifier); sum of these 3.62964e-7 kg
- bronze: 1.62093e-5 kg
- building, hall: 1.25509e-6, 9.19218e-9 m2 (2 suppliers, which the file names only by identifier); sum of these 1.26428e-6 m2
- building, hall, steel construction: 2.28809e-7, 7.51003e-10 m2 (2 suppliers, which the file names only by identifier); sum of these 2.2956e-7 m2
- building, multi-storey: 8.86312e-9, 1.57249e-6 m3 (2 suppliers, which the file names only by identifier); sum of these 1.58135e-6 m3
- cable, three-conductor cable: 1.96835e-8 m
- cable, unspecified: 4.40072e-6 kg
- cadmium: 1.25327e-11 kg
- calcium chloride: 8.28148e-10 kg
- carbon dioxide, liquid: 1.31026e-9, 8.32695e-7 kg (2 suppliers, which the file names only by identifier); sum of these 8.34005e-7 kg
- cast iron: 0.00059981 kg
- cathode, for aluminium electrolysis: 2.2169e-8 kg
- cement, CEM III/A: 7.72596e-7, 3.22852e-10, 1.11179e-5, 1.24932e-8 kg (4 suppliers, which the file names only by identifier); sum of these 1.19033e-5 kg
- cement, Portland: 0.00336582, 0.00499746 kg (2 suppliers, which the file names only by identifier); sum of these 0.00836328 kg
- cement, unspecified: 8.27859e-5, 5.23108e-9 kg (2 suppliers, which the file names only by identifier); sum of these 8.27911e-5 kg
- ceramic tile: 4.38671e-5 kg
- charcoal: 1.35421e-7 kg
- chemical factory: 8.85351e-7, 4.03586e-7 kg (2 suppliers, which the file names only by identifier); sum of these 1.28894e-6 kg
- chemical factory, organics: 6.19958e-12 unit
- chemical, inorganic: 4.7797e-6 kg
- chemical, organic: 0.000394843 kg
- chimney: 1.64265e-11 m
- chlorine dioxide: 2.90549e-9 kg
- chlorine, gaseous: 0.000386775 kg
- chlorine, liquid: 6.53566e-9, 1.28879e-7 kg (2 suppliers, which the file names only by identifier); sum of these 1.35415e-7 kg
- chromium: 1.71027e-7 kg
- chromium oxide, flakes: 5.46341e-8 kg
- chromium steel pipe: 1.37572e-6 kg
- coke: 6.52346e-7 MJ
- compressed air, 1000 kPa gauge: 9.28687e-6, 3.77902e-6 m3 (2 suppliers, which the file names only by identifier); sum of these 1.30659e-5 m3
- compressed air, 600 kPa gauge: 0.000138722 m3
- compressed air, 800 kPa gauge: 4.46552e-5, 1.81711e-5 m3 (2 suppliers, which the file names only by identifier); sum of these 6.28263e-5 m3
- concrete block: 6.88819e-7, 5.43823e-9, 1.20065e-8 kg (3 suppliers, which the file names only by identifier); sum of these 7.06264e-7 kg
- concrete mixing factory: 1.71825e-14 unit
- concrete, 25MPa: 8.20267e-8, 9.23878e-11, 3.55216e-8, 4.3146e-11, 1.46076e-9, 1.43746e-9 m3 (6 suppliers, which the file names only by identifier); sum of these 1.20582e-7 m3
- concrete, 30MPa: 5.14762e-10 m3
- concrete, 37MPa: 4.24482e-5 m3
- concrete, medium strength: 2.76749e-9 m3
- concrete, normal strength: 1.37946e-9, 1.17401e-7, 1.94017e-10, 7.15251e-8, 3.05463e-10, 5.37723e-7, 2.47294e-9, 1.04873e-7, 1.87435e-10, 2.46362e-7 m3 (10 suppliers, which the file names only by identifier); sum of these 1.08242e-6 m3
- copper scrap, sorted, pressed: -8.64832e-6 kg
- copper, cathode: 0.000133943 kg
- corrugated board box: 2.219e-7, 5.15053e-7, 2.08149e-7, 8.2658e-9 kg (4 suppliers, which the file names only by identifier); sum of these 9.53368e-7 kg
- cryolite: 6.01194e-9 kg
- decommissioned airport infrastructure, contaminated gravel: -1.25795e-13 unit
- decommissioned chemical production facilities: -1.28894e-6 kg
- decommissioned pipeline, natural gas: -3.17605e-5 kg
- diesel: 8.51462e-7, 4.06318e-5 kg (2 suppliers, which the file names only by identifier); sum of these 4.14833e-5 kg
- diesel, burned in agricultural machinery: 3.08045e-6 MJ
- diesel, burned in building machine: 0.457138 MJ
- diesel, burned in diesel-electric generating set, 18.5kW: 8.44423e-7 MJ
- diesel, low-sulfur: 5.3792e-10 kg
- dimethyldichlorosilane: 1.10072e-8 kg
- dolomite: 2.01754e-5, 1.07509e-5 kg (2 suppliers, which the file names only by identifier); sum of these 3.09263e-5 kg
- door, inner, wood: 1.57383e-10 m2
- drawing of pipe, steel: 1.92158e-7, 0.000473292 kg (2 suppliers, which the file names only by identifier); sum of these 0.000473484 kg
- dust collector, electrostatic precipitator, for industrial use: 1.04231e-13 unit
- electricity, high voltage: 1.55733e-7, 2.11625e-6, 1.889e-8, 1.12439e-7, 2.06543e-6, 4.51117e-7, 3.29704e-8, 5.65497e-7, 6.60436e-7, 1.21142e-8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 kWh (48 suppliers, which the file names only by identifier); sum of these 0.000690231 kWh
- electricity, low voltage: 2.87215e-8, 2.48218e-7, 7.79788e-9, 2.59469e-8, 3.49373e-8, 2.40288e-8, 1.32572e-7, 4.71413e-7, 1.01468e-5, 2.55103e-7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 kWh (52 suppliers, which the file names only by identifier); sum of these 0.00254396 kWh
- electricity, medium voltage: 1.82791e-6, 2.5229e-6, 3.58595e-6, 7.57405e-7, 0.000260119, 0.00581325, 4.34007e-5, 1.42213e-8, 8.88787e-7, 8.3321e-6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 kWh (133 suppliers, which the file names only by identifier); sum of these 0.125364 kWh
- electricity, medium voltage, aluminium industry: 5.28525e-5 kWh
- electronic component machinery, unspecified: 5.24741e-8 unit
- electronic component, passive, unspecified: 1.64915e-5 kg
- electronics scrap from control units: -4.15348e-6 kg
- electronics, for control units: 6.85923e-6 kg
- elevator, hydraulic: 1.08928e-11 unit
- energy and auxilliary inputs, metal working factory: 3.96859e-13, 8.84986e-14 kg (2 suppliers, which the file names only by identifier); sum of these 4.85357e-13 kg
- epoxy resin, liquid: 7.66956e-6, 1.6432e-6 kg (2 suppliers, which the file names only by identifier); sum of these 9.31276e-6 kg
- ethoxylated alcohol (AE3): 3.82855e-5 kg
- ethoxylated alcohol (AE7): 3.90264e-5, 3.51699e-6 kg (2 suppliers, which the file names only by identifier); sum of these 4.25434e-5 kg
- ethylene: 0.00155753 kg
- ethylene dichloride: 0.000126468 kg
- ethylene glycol: 5.1576e-6 kg
- ethylene glycol monoethyl ether: 6.50847e-10 kg
- ethylene vinyl acetate copolymer: 2.39071e-6, 1.23195e-6 kg (2 suppliers, which the file names only by identifier); sum of these 3.62266e-6 kg
- excavation, hydraulic digger: 9.01326e-6, 5.05867e-7 m3 (2 suppliers, which the file names only by identifier); sum of these 9.51913e-6 m3
- excavation, skid-steer loader: 0.00306932 m3
- explosive, tovex: 4.31945e-5 kg
- extrusion of plastic sheets and thermoforming, inline: 5.53266e-7 kg
- extrusion, plastic film: 1.8773e-7, 3.03484e-7 kg (2 suppliers, which the file names only by identifier); sum of these 4.91214e-7 kg
- extrusion, plastic pipes: 1.33034e-6, 1.93314e-8 kg (2 suppliers, which the file names only by identifier); sum of these 1.34967e-6 kg
- ferrite: 5.88189e-7 kg
- ferromanganese, high-coal, 74.5% Mn: 8.65142e-8 kg
- fibre cement facing tile: 0.000560002 kg
- fibre cement roof slate: 9.83135e-5 kg
- filter dust from Al electrolysis: -1.27754e-8 kg
- flat glass factory: 5.30469e-14 unit
- flat glass, coated: 5.46917e-6, 3.07476e-6 kg (2 suppliers, which the file names only by identifier); sum of these 8.54393e-6 kg
- flat glass, uncoated: 1.25791e-5, 6.05909e-5 kg (2 suppliers, which the file names only by identifier); sum of these 7.317e-5 kg
- fly ash and scrubber sludge: -5.9836e-11, -5.05517e-9 kg (2 suppliers, which the file names only by identifier); sum of these -5.115e-9 kg
- formaldehyde: 2.1554e-9, 9.01189e-9 kg (2 suppliers, which the file names only by identifier); sum of these 1.11673e-8 kg
- furnace, wood chips, with silo, 1000kW: 5.72167e-13 unit
- furnace, wood chips, with silo, 5000kW: 2.20131e-12 unit
- gas boiler: 1.02347e-11 unit
- generator, 200kW electrical: 5.11735e-12 unit
- glass fibre: 2.84231e-6 kg
- glass fibre reinforced plastic, polyamide, injection moulded: 1.47472e-5 kg
- glass fibre reinforced plastic, polyester resin, hand lay-up: 8.35356e-6 kg
- glass tube, borosilicate: 1.16603e-7 kg
- glass wool mat: 9.98516e-5 kg
- glued laminated timber, MUF-glue: 8.72226e-8 m3
- glued laminated timber, PUR-glue: 8.72226e-8 m3
- glued laminated timber, average glue mix: 1.02385e-7, 2.22297e-7 m3 (2 suppliers, which the file names only by identifier); sum of these 3.24682e-7 m3
- glycerine: 1.0138e-8, 5.73206e-8 kg (2 suppliers, which the file names only by identifier); sum of these 6.74586e-8 kg
- gold: 3.15101e-11 kg
- graphite: 2.67434e-11 kg
- gravel, crushed: 1.31623, 9.16623e-6, 3.51834e-5, 1.83019e-7, 2.00225e-6 kg (5 suppliers, which the file names only by identifier); sum of these 1.31627 kg
- gravel, round: 8.54508e-7, 0.0769339 kg (2 suppliers, which the file names only by identifier); sum of these 0.0769347 kg
- gypsum plasterboard: 1.56187e-6 kg
- hard coal: 9.62084e-5, 4.36242e-5, 2.69447e-5, 0.000308739, 4.45175e-5, 3.39653e-5, 1.89316e-5, 1.03517e-5 kg (8 suppliers, which the file names only by identifier); sum of these 0.000583283 kg
- hazardous waste, for incineration: -4.51692e-8, -8.47154e-5, -2.21441e-6 kg (3 suppliers, which the file names only by identifier); sum of these -8.6975e-5 kg
- hazardous waste, for underground deposit: -2.07369e-6, -1.32741e-7 kg (2 suppliers, which the file names only by identifier); sum of these -2.20644e-6 kg
- heat, central or small-scale, natural gas: 8.35119e-6 MJ
- heat, central or small-scale, other than natural gas: 0.000165863, 0.00614901 MJ (2 suppliers, which the file names only by identifier); sum of these 0.00631488 MJ
- heat, district or industrial, natural gas: 0.0127679, 0.005776, 3.68551e-6, 5.23008e-7, 0.00951818, 1.52609e-6, 2.32718e-8, 0.00039873, 2.00792e-5 MJ (9 suppliers, which the file names only by identifier); sum of these 0.0284866 MJ
- heat, district or industrial, other than natural gas: 2.88619e-7, 9.8819e-6, 0.000377011, 4.21973e-7, 7.62717e-5, 1.60167e-8, 0.000261155, 0.102421, 4.42037e-7, 3.65156e-7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 MJ (12 suppliers, which the file names only by identifier); sum of these 0.108926 MJ
- heat, from steam, in chemical industry: 0.00117247 MJ
- heavy fuel oil: 4.77801e-6 kg
- hot water tank factory: 3.36535e-13 unit
- hydrochloric acid, without water, in 30% solution state: 4.86726e-5, 7.87717e-10 kg (2 suppliers, which the file names only by identifier); sum of these 4.86734e-5 kg
- hydrogen peroxide, without water, in 50% solution state: 1.39303e-5, 5.10266e-6 kg (2 suppliers, which the file names only by identifier); sum of these 1.9033e-5 kg
- hydrogen, liquid: 4.32416e-7 kg
- ilmenite, 54% titanium dioxide: 1.15634e-7 kg
- industrial furnace, 1MW, oil: 9.23812e-11 unit
- industrial furnace, natural gas: 6.75351e-11 unit
- industrial machine, heavy, unspecified: 2.70772e-10 kg
- inert waste: -1.87133e-7, -5.95541e-5, -7.99335e-7 kg (3 suppliers, which the file names only by identifier); sum of these -6.05405e-5 kg
- inert waste, for final disposal: -1.46171, -0.000127018 kg (2 suppliers, which the file names only by identifier); sum of these -1.46184 kg
- injection moulding: 3.13113e-5 kg
- ion-exchanger for water treatment: 1.19116e-10 unit
- iron ore concentrate: 8.98157e-9, 0.0471113 kg (2 suppliers, which the file names only by identifier); sum of these 0.0471113 kg
- iron scrap, sorted, pressed: 3.35509e-6 kg
- iron sulfate: 8.18797e-5 kg
- iron(III) sulfate, without water, in 12.5% iron solution state: 1.93587e-7 kg
- iron-nickel-chromium alloy: 2.23253e-5 kg
- isopropanol: 7.7919e-9, 1.071e-9 kg (2 suppliers, which the file names only by identifier); sum of these 8.8629e-9 kg
- kaolin: 1.30933e-5 kg
- kraft paper: 4.08112e-6, 1.22663e-5 kg (2 suppliers, which the file names only by identifier); sum of these 1.63474e-5 kg
- latex: 5.35918e-6 kg
- lead: 1.36368e-5 kg
- lean concrete: 1.18919e-7 m3
- light fuel oil: 6.43943e-7, 1.05796e-6 kg (2 suppliers, which the file names only by identifier); sum of these 1.7019e-6 kg
- lime: 3.13381e-6, 1.31896e-5 kg (2 suppliers, which the file names only by identifier); sum of these 1.63234e-5 kg
- lime, hydrated, loose weight: 3.74317e-7 kg
- lime, hydrated, packed: 1.56725e-9, 2.00545e-8 kg (2 suppliers, which the file names only by identifier); sum of these 2.16217e-8 kg
- lime, packed: 6.48577e-7, 2.54743e-5 kg (2 suppliers, which the file names only by identifier); sum of these 2.61229e-5 kg
- limestone residue: -4.84144e-6 kg
- limestone, crushed, washed: 1.7654e-6 kg
- lithium fluoride: 1.10072e-8 kg
- lubricating oil: 1.75909e-5, 0.000356457 kg (2 suppliers, which the file names only by identifier); sum of these 0.000374048 kg
- magnesium sulfate: 6.80988e-8 kg
- maintenance, refrigeration machine: 1.09353e-9 unit
- maintenance, transmission network, electricity, high voltage direct current aerial line: 3.2946e-9 km*year
- maintenance, transmission network, electricity, high voltage direct current subsea cable: 1.22514e-8 km*year
- maize starch: 2.42891e-7 kg
- maleic unsaturated polyester resin: 1.10892e-6 kg
- manganese: 8.21752e-11 kg
- marine engine: 6.564e-7 unit
- medium density fibreboard: 2.57414e-9, 1.6486e-8 m3 (2 suppliers, which the file names only by identifier); sum of these 1.90601e-8 m3
- melamine formaldehyde resin: 7.85685e-7 kg
- metal working factory: 4.85357e-13 unit
- metal working, average for aluminium product manufacturing: 2.45564e-6, 7.35711e-8 kg (2 suppliers, which the file names only by identifier); sum of these 2.52921e-6 kg
- metal working, average for chromium steel product manufacturing: 5.99365e-6, 1.37283e-6 kg (2 suppliers, which the file names only by identifier); sum of these 7.36648e-6 kg
- metal working, average for metal product manufacturing: 4.94956e-7 kg
- metal working, average for steel product manufacturing: 7.49727e-6, 0.000276442 kg (2 suppliers, which the file names only by identifier); sum of these 0.00028394 kg
- methyl ethyl ketone: 4.25422e-10, 1.60534e-10 kg (2 suppliers, which the file names only by identifier); sum of these 5.85956e-10 kg
- methylcyclopentane: 1.58567e-6 kg
- mill scale: -9.55982e-10 kg
- municipal solid waste: -1.81807e-5, -1.03759e-9, -0.000362921, -1.0161e-8, -2.00496e-5, -7.14327e-9 kg (6 suppliers, which the file names only by identifier); sum of these -0.00040117 kg
- natural gas, high pressure: 0.000116424, 8.34194e-7 m3 (2 suppliers, which the file names only by identifier); sum of these 0.000117258 m3
- natural stone plate, cut: 2.83082e-9 kg
- nickel smelter slag: -8.40477e-8 kg
- nickel, class 1: 8.53147e-8 kg
- nitric acid, without water, in 50% solution state: 1.08651e-11, 0.000382855, 1.61439e-11, 4.01468e-11, 5.22097e-11, 1.92362e-11, 6.61602e-11, 1.7442e-11, 1.60841e-11, 1.22575e-10 kg (10 suppliers, which the file names only by identifier); sum of these 0.000382856 kg
- nitrogen, liquid: 0.000137629 kg
- nylon 6: 2.92638e-7, 1.68945e-7 kg (2 suppliers, which the file names only by identifier); sum of these 4.61582e-7 kg
- oil storage, 3000l: 1.53997e-11 unit
- oxygen, liquid: 0.000109603, 9.17972e-6 kg (2 suppliers, which the file names only by identifier); sum of these 0.000118782 kg
- packaging box factory: 1.495e-14 unit
- packaging film, low density polyethylene: 2.56578e-7 kg
- palladium: 1.3723e-11 kg
- paper machine: 2.18057e-14 unit
- paper, woodcontaining, lightweight coated: 8.61251e-6, 2.45457e-5 kg (2 suppliers, which the file names only by identifier); sum of these 3.31582e-5 kg
- paper, woodfree, coated: 1.72648e-6 kg
- paraffin: 2.94103e-7 kg
- particleboard, uncoated: 1.01858e-8, 4.92079e-9 m3 (2 suppliers, which the file names only by identifier); sum of these 1.51066e-8 m3
- perfluoropentane: 4.20961e-6 kg
- petrol, unleaded: 7.74898e-6 kg
- petroleum coke: 5.66005e-5 kg
- phenolic resin: 2.65843e-7 kg
- phenyl isocyanate: 2.14065e-5 kg
- phosphoric acid, industrial grade, without water, in 85% solution state: 2.84194e-8 kg
- pig iron: 1.31715e-5, 7.60617e-6 kg (2 suppliers, which the file names only by identifier); sum of these 2.07777e-5 kg
- pipeline, natural gas, low pressure distribution network: 2.24459e-12 km
- pipeline, petroleum: 1.16461e-12, 2.35818e-12 km (2 suppliers, which the file names only by identifier); sum of these 3.52279e-12 km
- pitch: 2.83294e-5, 9.61211e-8, 7.73798e-9, 3.85432e-10, 1.21225e-5, 4.73799e-8, 6.02325e-9, 2.3351e-9 kg (8 suppliers, which the file names only by identifier); sum of these 4.06119e-5 kg
- plastic processing factory: 2.95409e-14 unit
- platinum: 7.45997e-11 kg
- plywood: 5.19676e-9, 7.35387e-8 m3 (2 suppliers, which the file names only by identifier); sum of these 7.87355e-8 m3
- polyacrylamide: 5.41079e-6 kg
- polycarbonate: 2.12375e-8 kg
- polyester resin, unsaturated: 7.26818e-8, 4.97668e-7 kg (2 suppliers, which the file names only by identifier); sum of these 5.7035e-7 kg
- polyethylene terephthalate, granulate, amorphous: 3.6036e-6 kg
- polyethylene, high density, granulate: 0.000151299 kg
- polyethylene, linear low density, granulate: 1.77749e-7 kg
- polyethylene, low density, granulate: 1.84442e-5 kg
- polymer foaming: 3.95963e-9 kg
- polymethyl methacrylate, beads: 4.30844e-9 kg
- polyol: 5.24974e-6, 1.06301e-5 kg (2 suppliers, which the file names only by identifier); sum of these 1.58798e-5 kg
- polypropylene, granulate: 7.1784e-5 kg
- polystyrene foam slab: 2.13562e-5 kg
- polystyrene, expandable: 2.52096e-5 kg
- polystyrene, general purpose: 7.63946e-6 kg
- polystyrene, high impact: 3.37689e-5 kg
- polyurethane, flexible foam: 2.74023e-5, 5.79808e-6 kg (2 suppliers, which the file names only by identifier); sum of these 3.32004e-5 kg
- polyurethane, rigid foam: 1.94906e-6, 2.44885e-6 kg (2 suppliers, which the file names only by identifier); sum of these 4.39791e-6 kg
- polyvinylchloride, bulk polymerised: 2.94201e-5 kg
- polyvinylchloride, emulsion polymerised: 8.07644e-7 kg
- polyvinylchloride, suspension polymerised: 1.11607e-5 kg
- polyvinylidenchloride, granulate: 8.36544e-6, 1.6939e-5 kg (2 suppliers, which the file names only by identifier); sum of these 2.53044e-5 kg
- potassium hydroxide: 3.18295e-8 kg
- potassium permanganate: 2.12385e-8 kg
- potato starch: 6.71169e-6 kg
- powder coat, steel: 3.74227e-6 m2
- printed paper: 5.29698e-7 kg
- printed wiring board, surface mounted, unspecified, Pb free: 4.40582e-7 kg
- printer, laser, black/white: 3.41743e-9 unit
- printer, laser, colour: 3.41779e-9 unit
- printing ink, offset, without solvent, in 47.5% solution state: 1.14068e-7, 1.1514e-8 kg (2 suppliers, which the file names only by identifier); sum of these 1.25582e-7 kg
- propane, burned in building machine: 2.57935e-5 MJ
- propylene: 0.000529205 kg
- propylene glycol, liquid: 7.50865e-8, 2.06675e-5 kg (2 suppliers, which the file names only by identifier); sum of these 2.07426e-5 kg
- pulpwood, hardwood, measured as solid wood under bark: 2.62316e-7, 9.1682e-9, 2.54714e-10 m3 (3 suppliers, which the file names only by identifier); sum of these 2.71739e-7 m3
- pulpwood, softwood, measured as solid wood under bark: 4.3916e-8, 7.65239e-8, 5.36614e-10, 7.85897e-7 m3 (4 suppliers, which the file names only by identifier); sum of these 9.06873e-7 m3
- quicklime, in pieces, loose: 6.46449e-7 kg
- quicklime, milled, loose: 8.75032e-6 kg
- railway track: 8.72899e-10 m*year
- refractory spent pot liner from Al electrolysis: -5.41075e-8 kg
- refractory, fireclay, packed: 0.00105202 kg
- refrigerant R134a: 3.3348e-9 kg
- refrigeration machine, R134a as refrigerant: 9.1709e-9 unit
- refrigeration machine, carbon dioxide, liquid as refrigerant: 1.01901e-9 unit
- reinforcing steel: 0.0153021 kg
- residue from TiO2 production, sulfate process: -2.3409e-8 kg
- retention aid, for paper production: 2.96317e-8 kg
- road: 9.53297e-6 m*year
- road vehicle factory: 3.03451e-14 unit
- road, company, internal: 4.69958e-8 m2*year
- rolling mill: 1.38158e-12 unit
- rosin size, for paper production: 5.67262e-7, 3.56286e-8 kg (2 suppliers, which the file names only by identifier); sum of these 6.02891e-7 kg
- sand: 4.24562e-7, 2.20413e-9, 0.00928993, 2.76288e-5 kg (4 suppliers, which the file names only by identifier); sum of these 0.00931798 kg
- sanitary ceramics: 8.91564e-5 kg
- sawdust, wet, measured as dry mass: 1.13998e-8, 9.88598e-7 kg (2 suppliers, which the file names only by identifier); sum of these 9.99997e-7 kg
- sawlog and veneer log, eucalyptus ssp., measured as solid wood under bark: 9.15491e-9 m3
- sawlog and veneer log, softwood, debarked, measured as solid wood: 1.60771e-9 m3
- sawnwood, beam, softwood, dried (u=10%), planed: 8.92729e-12 m3
- sawnwood, hardwood, dried (u=10%), planed: 2.16209e-10, 8.77837e-11 m3 (2 suppliers, which the file names only by identifier); sum of these 3.03992e-10 m3
- sawnwood, softwood, dried (u=20%), planed: 3.01625e-6 m3
- scrap aluminium: -0.000197737, -1.71106e-5, -3.12015e-5 kg (3 suppliers, which the file names only by identifier); sum of these -0.000246049 kg
- scrap copper: -2.00148e-5, -3.35461e-5, -6.95941e-5 kg (3 suppliers, which the file names only by identifier); sum of these -0.000123155 kg
- scrap lead acid battery: -3.99898e-6 kg
- scrap steel: -0.0112529, -5.65428e-7, -0.01016, -0.00328667 kg (4 suppliers, which the file names only by identifier); sum of these -0.0247001 kg
- seal, natural rubber based: 1.11989e-6 kg
- seawater reverse osmosis module: 6.71094e-10 m2
- section bar rolling, steel: 2.46473e-5 kg
- sewage sludge, 70% water, WWT[R], WW from anaerobic digestion of whey: -0.000442754 kg
- sewage sludge, 97% water, WWT[R], WW from anaerobic digestion of whey: -0.000491949 kg
- sewage sludge, dried: -4.01981e-7 kg
- sheet rolling, aluminium: 1.1766e-8, 6.20654e-6 kg (2 suppliers, which the file names only by identifier); sum of these 6.2183e-6 kg
- sheet rolling, chromium steel: 2.89508e-5, 1.69136e-8 kg (2 suppliers, which the file names only by identifier); sum of these 2.89678e-5 kg
- sheet rolling, copper: 9.12633e-6 kg
- sheet rolling, steel: 0.000779472, 0.000517667 kg (2 suppliers, which the file names only by identifier); sum of these 0.00129714 kg
- silica sand: 2.37116e-5 kg
- silicon carbide: 1.55266e-6 kg
- silicone product: 1.32936e-8, 2.11555e-8 kg (2 suppliers, which the file names only by identifier); sum of these 3.44491e-8 kg
- silver: 1.26041e-10 kg
- slab and siding, softwood, wet, measured as dry mass: 1.88389e-7, 2.41972e-9 kg (2 suppliers, which the file names only by identifier); sum of these 1.90809e-7 kg
- sludge from pulp and paper production: -7.51094e-6 kg
- sludge from steel rolling: -1.49389e-6 kg
- soap: 1.40781e-7 kg
- soda ash, light: 1.14701e-6 kg
- sodium chlorate, powder: 0.000146565, 1.69682e-5 kg (2 suppliers, which the file names only by identifier); sum of these 0.000163533 kg
- sodium chloride, brine solution: 0.000139909 kg
- sodium chloride, powder: 4.85687e-5 kg
- sodium dithionite, anhydrous: 1.06958e-9, 5.07745e-9 kg (2 suppliers, which the file names only by identifier); sum of these 6.14704e-9 kg
- sodium hydrosulfide: 7.91386e-7 kg
- sodium hydroxide, without water, in 50% solution state: 0.00167203 kg
- sodium hypochlorite, without water, in 15% solution state: 3.49849e-5 kg
- sodium percarbonate, powder: 3.63889e-9, 7.3683e-9 kg (2 suppliers, which the file names only by identifier); sum of these 1.10072e-8 kg
- sodium phosphate: 4.46106e-8 kg
- sodium pyrophosphate: 1.04192e-8 kg
- sodium silicate, solid: 4.26456e-8, 9.82734e-9 kg (2 suppliers, which the file names only by identifier); sum of these 5.24729e-8 kg
- sodium sulfate, anhydrite: 1.87837e-6, 3.06804e-7 kg (2 suppliers, which the file names only by identifier); sum of these 2.18518e-6 kg
- sodium tripolyphosphate: 2.9081e-9 kg
- solvent, organic: 8.47509e-6 kg
- spent activated carbon, granular: -2.5388e-8 kg
- spent solvent mixture: -3.76596e-7, -2.85737e-8, -1.22014e-6 kg (3 suppliers, which the file names only by identifier); sum of these -1.62531e-6 kg
- steam, in chemical industry: 0.000167469, 0.000949841 kg (2 suppliers, which the file names only by identifier); sum of these 0.00111731 kg
- steatite: 2.0174e-7 kg
- steel, chromium steel 18/8: 0.000254667 kg
- steel, chromium steel 18/8, hot rolled: 0.00283555 kg
- steel, low-alloyed: 0.00163443 kg
- steel, low-alloyed, hot rolled: 0.00639315 kg
- steel, unalloyed: 9.83906e-6 kg
- stone wool: 0.000102456 kg
- stone wool, packed: 1.22911e-7 kg
- sugar beet: 6.87003e-5 kg
- sugar beet pulp: -1.40162e-5 kg
- sugar refinery: 1.07818e-15 unit
- sulfur: 6.82121e-7 kg
- sulfur dioxide, liquid: 1.76532e-7 kg
- sulfur hexafluoride, liquid: 3.55921e-9 kg
- sulfuric acid: 1.25794e-7, 0.00187158 kg (2 suppliers, which the file names only by identifier); sum of these 0.0018717 kg
- synthetic rubber: 4.37551e-5 kg
- tap water: 1.92352e-5, 0.026285, 0.000154629, 3.58165e-5, 0.0664413, 0.00271262, 6.95566e-5, 0.0108153, 2.33369e-5, 0.000227703 kg (10 suppliers, which the file names only by identifier); sum of these 0.106785 kg
- textile, jute: 5.95957e-10 kg
- textile, woven cotton: 1.12712e-6 kg
- thermoforming, with calendering: 4.94346e-10 kg
- tin: 3.86878e-9 kg
- titanium dioxide: 1.5375e-9, 3.075e-9 kg (2 suppliers, which the file names only by identifier); sum of these 4.6125e-9 kg
- titanium tetrachloride: 6.96577e-7 kg
- toner module, laser printer, black/white: 6.56146e-7 unit
- toner module, laser printer, colour: 6.56217e-7 unit
- tower silo, plastic: 5.63763e-7 m3
- transport, freight train: 3.21184e-5, 1.11915e-5, 4.05653e-5, 2.06282e-6, 2.94033e-5, 1.89377e-6 metric ton*km (6 suppliers, which the file names only by identifier); sum of these 0.000117235 metric ton*km
- transport, freight, lorry 16-32 metric ton, EURO4: 1.90597e-7 metric ton*km
- transport, freight, lorry >32 metric ton, EURO5: 1.08176e-5 metric ton*km
- transport, freight, sea, bulk carrier for dry goods: 5.44181e-5 metric ton*km
- transport, helicopter: 1.28541e-8 hour
- transport, helicopter, LTO cycle: 5.14162e-9 unit
- transport, passenger car: 0.00053765 km
- transport, tractor and trailer, agricultural: 6.87003e-7 metric ton*km
- trisodium phosphate: 1.8377e-6 kg
- ultrafiltration module: 2.85306e-12 unit
- ultraviolet lamp: 1.23675e-9 unit
- unreinforced concrete, 15MPa: 8.79788e-6 m3
- urea: 1.31379e-8 kg
- urea formaldehyde resin: 8.71736e-7 kg
- used cable: -4.40072e-6 kg
- used diesel-electric generating set, 18.5kW: -1.59639e-9 unit
- used door, inner, wood: -1.57383e-10 m2
- used industrial electronic device: -1.12115e-8, -3.75341e-8 kg (2 suppliers, which the file names only by identifier); sum of these -4.87456e-8 kg
- used intermodal shipping container, 20-foot: -6.32167e-8 unit
- used intermodal shipping container, 40-foot: -1.61676e-8 unit
- used intermodal shipping container, 40-foot, high-cube: -2.24372e-8 unit
- used intermodal shipping container, 45-foot, high-cube: -3.78886e-9 unit
- used lorry with refrigeration machine, 16 metric ton: -5.09857e-9 unit
- used perfluoropentane: -4.20961e-6 kg
- used printed wiring boards: -4.40582e-7 kg
- used reefer, intermodal shipping container, 40-foot, high-cube: -5.09133e-9 unit
- used refrigeration machine, R134a as refrigerant: -7.41067e-10 unit
- used refrigeration machine, carbon dioxide, liquid as refrigerant: -3.52461e-10 unit
- used toner module, laser printer, black/white: -5.77408e-7 kg
- used toner module, laser printer, colour: -5.77471e-7 kg
- used window frame, wood-metal: -9.50274e-10 m2
- vegetable oil, refined: 9.41528e-8 kg
- vinyl acetate: 2.01497e-7 kg
- vinyl chloride: 0.000116299 kg
- waste aluminium: -2.46468e-5 kg
- waste asphalt: -1.06408e-6, -9.03227e-9 kg (2 suppliers, which the file names only by identifier); sum of these -1.07311e-6 kg
- waste bitumen: -2.48419e-5 kg
- waste bitumen sheet: -0.000353616 kg
- waste brick: -0.000658317 kg
- waste building wood, chrome preserved: -0.000573298 kg
- waste bulk iron, excluding reinforcement: -4.33079e-5, -2.08268e-5, -9.23391e-6 kg (3 suppliers, which the file names only by identifier); sum of these -7.33686e-5 kg
- waste cement in concrete and mortar: -0.000367895 kg
- waste concrete: -0.00785248, -0.000170595, -1.6947e-5 kg (3 suppliers, which the file names only by identifier); sum of these -0.00804003 kg
- waste concrete gravel: -0.000528741 kg
- waste concrete, not reinforced: -4.29557e-7, -0.000432329, -6.13052e-6 kg (3 suppliers, which the file names only by identifier); sum of these -0.000438889 kg
- waste electric and electronic equipment: -0.00015014 kg
- waste electric wiring: -3.11554e-6 kg
- waste emulsion paint: -1.99797e-9, -6.75292e-5, -6.36559e-6 kg (3 suppliers, which the file names only by identifier); sum of these -7.38968e-5 kg
- waste glass: -2.5166e-7, -6.09346e-7, -7.50319e-6, -5.68511e-8, -1.26784e-5, -8.63316e-8, -6.23055e-5, -1.3824e-8, -7.00413e-6 kg (9 suppliers, which the file names only by identifier); sum of these -9.05093e-5 kg
- waste glass pane in burnable frame: -8.35356e-6 kg
- waste glass sheet: -8.18458e-7, -2.0838e-8, -3.15382e-6 kg (3 suppliers, which the file names only by identifier); sum of these -3.99312e-6 kg
- waste graphical paper: -3.05085e-7 kg
- waste gypsum: -9.59179e-9, -2.02911e-7 kg (2 suppliers, which the file names only by identifier); sum of these -2.12503e-7 kg
- waste gypsum plasterboard: -1.56187e-6 kg
- waste mineral oil: -2.56846e-6, -1.43998e-5, -5.51124e-6 kg (3 suppliers, which the file names only by identifier); sum of these -2.24795e-5 kg
- waste mineral wool: -0.000129957, -8.57109e-7, -5.53695e-5 kg (3 suppliers, which the file names only by identifier); sum of these -0.000186184 kg
- waste mineral wool, for final disposal: -0.000105476 kg
- waste packaging paper: -2.89794e-6, -1.1829e-7, -1.81367e-7, -5.65126e-16, -6.55355e-7, -1.1877e-6, -1.58589e-8, -6.39026e-8 kg (8 suppliers, which the file names only by identifier); sum of these -5.12042e-6 kg
- waste paint: -1.92072e-5, -5.6732e-9, -1.89054e-6 kg (3 suppliers, which the file names only by identifier); sum of these -2.11034e-5 kg
- waste paint on metal: -8.13443e-8, -6.90477e-10 kg (2 suppliers, which the file names only by identifier); sum of these -8.20347e-8 kg
- waste paint on wall: -4.15856e-8 kg
- waste paper, unsorted: -9.76545e-7, -2.42205e-7, -1.21875e-6 kg (3 suppliers, which the file names only by identifier); sum of these -2.4375e-6 kg
- waste paperboard: -5.38417e-9, -3.51164e-9, -6.54988e-7, -3.52587e-8, -3.67687e-7, -1.89705e-9, -1.94553e-8, -4.64151e-8, -4.70797e-10 kg (9 suppliers, which the file names only by identifier); sum of these -1.13507e-6 kg
- waste paperboard, unsorted: -5.47755e-8, -5.47755e-8 kg (2 suppliers, which the file names only by identifier); sum of these -1.09551e-7 kg
- waste plastic, mixture: -2.37041e-5, -1.19782e-7, -2.64279e-7, -2.32144e-5, -8.91951e-5, -0.000165981, -1.58382e-6, -6.21199e-7, -6.54173e-7 kg (9 suppliers, which the file names only by identifier); sum of these -0.000305338 kg
- waste polyethylene: -2.38834e-6, -6.25875e-8, -1.67197e-5, -1.59579e-7, -9.33041e-6, -1.20687e-8, -6.5912e-8, -2.66277e-8, -2.07359e-6 kg (9 suppliers, which the file names only by identifier); sum of these -3.08388e-5 kg
- waste polyethylene terephthalate: -8.67152e-7 kg
- waste polyethylene/polypropylene product: -1.04751e-5, -4.53004e-6, -4.44857e-7 kg (3 suppliers, which the file names only by identifier); sum of these -1.545e-5 kg
- waste polypropylene: -5.66849e-8, -4.40646e-6, -2.56919e-8, -3.55928e-5, -1.40313e-7, -2.20429e-8, -3.39712e-7, -1.3324e-7, -5.08428e-6 kg (9 suppliers, which the file names only by identifier); sum of these -4.58012e-5 kg
- waste polystyrene: -1.21993e-7, -3.25881e-5, -5.18998e-8, -4.65508e-6, -1.28468e-7, -2.3523e-8, -3.11034e-7, -4.03448e-6 kg (8 suppliers, which the file names only by identifier); sum of these -4.19146e-5 kg
- waste polystyrene isolation, flame-retardant: -2.13562e-5 kg
- waste polyurethane: -1.8556e-7 kg
- waste polyurethane foam: -8.16307e-6, -6.40298e-9 kg (2 suppliers, which the file names only by identifier); sum of these -8.16948e-6 kg
- waste polyvinylchloride: -1.68881e-8, -8.75832e-8, -3.72608e-8, -9.22323e-8, -5.91432e-6, -2.23303e-7, -3.52332e-6, -2.8965e-6, -2.33962e-5 kg (9 suppliers, which the file names only by identifier); sum of these -3.61877e-5 kg
- waste polyvinylchloride product: -5.25199e-8, -4.45575e-6, -1.73155e-6 kg (3 suppliers, which the file names only by identifier); sum of these -6.23982e-6 kg
- waste reinforced concrete: -0.0350692, -0.0594906, -0.000989899 kg (3 suppliers, which the file names only by identifier); sum of these -0.0955496 kg
- waste reinforcement steel: -2.21875e-6, -0.000322153 kg (2 suppliers, which the file names only by identifier); sum of these -0.000324372 kg
- waste rubber, unspecified: -1.05745e-6, -2.06002e-5, -2.06002e-5 kg (3 suppliers, which the file names only by identifier); sum of these -4.22578e-5 kg
- waste textile, soiled: -1.11084e-6, -1.66264e-8 kg (2 suppliers, which the file names only by identifier); sum of these -1.12746e-6 kg
- waste wire plastic: -9.95424e-7 kg
- waste wood pole, chrome preserved: -1.04438e-6 kg
- waste wood, post-consumer: -9.97797e-6, -9.97797e-6 kg (2 suppliers, which the file names only by identifier); sum of these -1.99559e-5 kg
- waste wood, untreated: -3.6987e-9, -0.00113063, -3.39371e-8, -5.059e-8, -5.40551e-6, -2.14667e-8, -0.000511116, -1.42092e-7, -4.85359e-7 kg (9 suppliers, which the file names only by identifier); sum of these -0.00164789 kg
- waste x-ray film: -1.2632e-8 kg
- waste yarn and waste textile: -1.55274e-5 kg
- waste, from silicon wafer production: -3.15502e-8 kg
- wastewater from concrete production: -3.41866e-11, -7.06938e-9 m3 (2 suppliers, which the file names only by identifier); sum of these -7.10356e-9 m3
- wastewater from hard fibreboard production: -4.94025e-8 m3
- wastewater from lorry production: -8.37411e-10, -1.73166e-7 m3 (2 suppliers, which the file names only by identifier); sum of these -1.74004e-7 m3
- wastewater from medium density board production: -7.61366e-9 m3
- wastewater from pig iron production: -4.74254e-10, -1.88709e-8 m3 (2 suppliers, which the file names only by identifier); sum of these -1.93452e-8 m3
- wastewater from vegetable oil refinery: -9.06451e-7 m3
- wastewater treatment facility, capacity 1.6E8l/year: 5.19245e-14 unit
- wastewater, average: -9.54928e-7, -4.66017e-9, -2.25795e-6, -3.32369e-5 m3 (4 suppliers, which the file names only by identifier); sum of these -3.64545e-5 m3
- wastewater, unpolluted: -0.0062102, -2.55162e-5 m3 (2 suppliers, which the file names only by identifier); sum of these -0.00623571 m3
- water works, capacity 1.1E10l/year: 3.56254e-14, 9.91614e-14 unit (2 suppliers, which the file names only by identifier); sum of these 1.34787e-13 unit
- water, completely softened: 1.93201e-7, 2.68798e-7, 3.5909e-7 kg (3 suppliers, which the file names only by identifier); sum of these 8.21089e-7 kg
- water, decarbonised: 1.01464, 0.00319583, 5.03304, 3.33632, 0.184185 kg (5 suppliers, which the file names only by identifier); sum of these 9.57138 kg
- water, deionised: 1.04167e-7, 2.89373e-5, 2.01197e-6 kg (3 suppliers, which the file names only by identifier); sum of these 3.10534e-5 kg
- wax, lost-wax casting: 6.21063e-6 kg
- welding, arc, steel: 0.00676317 m
- welding, gas, steel: 0.0512418 m
- white spirit: 1.59902e-6 kg
- window frame, aluminium, U=1.6 W/m2K: 3.27516e-8 m2
- window frame, wood-metal, U=1.6 W/m2K: 9.50274e-10 m2
- wire drawing, copper: 5.97947e-6, 1.03883e-5 kg (2 suppliers, which the file names only by identifier); sum of these 1.63678e-5 kg
- wire drawing, steel: 6.94161e-5 kg
- wood ash mixture, pure: -2.11474e-9, -1.02875e-7 kg (2 suppliers, which the file names only by identifier); sum of these -1.0499e-7 kg
- wood chips, dry, measured as dry mass: 0.000393181 kg
- wood chips, from post-consumer wood, measured as dry mass: 3.00912e-6 kg
- wood chips, wet, measured as dry mass: 4.95332e-6, 6.42026e-5, 1.04342e-8, 0.000158593, 3.96982e-10 kg (5 suppliers, which the file names only by identifier); sum of these 0.00022776 kg
- wood preservation, oscillating pressure method, inorganic salt, containing Cr, outdoor use, ground contact: 2.31848e-8 kg
- wood preservation, pressure vessel, creosote, outdoor use, ground contact: 1.2299e-6 kg
- wood preservative, inorganic salt, containing Cr: 2.86097e-8 kg
- wooden board factory, organic bonded boards: 1.01801e-15, 1.55659e-15 unit (2 suppliers, which the file names only by identifier); sum of these 2.57459e-15 unit
- yarn, cotton: 5.02843e-6 kg
- zinc: 7.32699e-5 kg
- zinc coat, coils: 1.73051e-7, 2.10991e-6 m2 (2 suppliers, which the file names only by identifier); sum of these 2.28296e-6 m2
- zinc coat, pieces: 6.03699e-7, 3.53425e-5 m2 (2 suppliers, which the file names only by identifier); sum of these 3.59462e-5 m2
- zircon: 4.23805e-6 kg

## Inputs from nature
- Carbon dioxide, in air [natural resource, in air]: 4.47699e-6 kg
- Occupation, construction site [natural resource, land]: 8.88848e-5 m2*year
- Occupation, dump site [natural resource, land]: 2.98603e-7 m2*year
- Occupation, industrial area [natural resource, land]: 0.000728669 m2*year
- Occupation, mineral extraction site [natural resource, land]: 0.000254844 m2*year
- Occupation, seabed, infrastructure [natural resource, land]: 1.34927e-6 m2*year
- Occupation, traffic area, rail/road embankment [natural resource, land]: 0.0168866 m2*year
- Occupation, traffic area, road network [natural resource, land]: 0.0798847 m2*year
- Occupation, urban, continuously built [natural resource, land]: 5.55827e-7 m2*year
- Occupation, urban, discontinuously built [natural resource, land]: 0.000555937 m2*year
- Occupation, urban/industrial fallow (non-use) [natural resource, land]: 0.000150289 m2*year
- Oxygen [natural resource, in air]: 0.000888807 kg
- Sand, unspecified [natural resource, in ground]: 0.0156437 kg
- Transformation, from annual crop [natural resource, land]: 1.9191e-9 m2
- Transformation, from arable land, unspecified use [natural resource, land]: 5.27405e-9 m2
- Transformation, from forest, unspecified [natural resource, land]: 6.63582e-6 m2
- Transformation, from industrial area [natural resource, land]: 2.63771e-7 m2
- Transformation, from pasture, man made [natural resource, land]: 1.18749e-5 m2
- Transformation, from seabed, unspecified [natural resource, land]: 3.37724e-8 m2
- Transformation, from unspecified [natural resource, land]: 0.000162186 m2
- Transformation, from urban, green area [natural resource, land]: 7.41103e-9 m2
- Transformation, from wetland, inland (non-use) [natural resource, land]: 1.27422e-6 m2
- Transformation, to annual crop [natural resource, land]: 5.35586e-6 m2
- Transformation, to dump site, residual material landfill [natural resource, land]: 2.98603e-9 m2
- Transformation, to industrial area [natural resource, land]: 2.36471e-5 m2
- Transformation, to mineral extraction site [natural resource, land]: 2.54844e-6 m2
- Transformation, to seabed, infrastructure [natural resource, land]: 3.37724e-8 m2
- Transformation, to traffic area, rail/road embankment [natural resource, land]: 4.18441e-5 m2
- Transformation, to traffic area, road network [natural resource, land]: 9.54683e-5 m2
- Transformation, to unspecified [natural resource, land]: 3.7567e-7 m2
- Transformation, to urban, continuously built [natural resource, land]: 7.41103e-9 m2
- Transformation, to urban, discontinuously built [natural resource, land]: 1.11187e-5 m2
- Transformation, to urban/industrial fallow (non-use) [natural resource, land]: 2.00466e-6 m2
- Water, cooling, unspecified natural origin [natural resource, in water]: 0.000114777 m3
- Water, lake [natural resource, in water]: 4.66608e-5 m3
- Water, river [natural resource, in water]: 5.69703e-5 m3
- Water, salt, ocean [natural resource, in water]: 2.87959e-7 m3
- Water, unspecified natural origin [natural resource, fossil well]: 3.09133e-5 m3
- Water, unspecified natural origin [natural resource, in water]: 5.86781e-6 m3
- Water, well, in ground [natural resource, in water]: 0.00165053 m3

## Emissions to nature
- 2-Propanol [air, unspecified]: 1.69267e-9 kg
- 2-Propanol [air, urban air close to ground]: 2.70772e-9 kg
- Acetaldehyde [air, unspecified]: 4.83057e-11 kg
- Acetaldehyde [air, urban air close to ground]: 1.25817e-11 kg
- Acetic acid [air, unspecified]: 1.63268e-10 kg
- Acetic acid [air, urban air close to ground]: 5.28977e-13 kg
- Acetone [air, unspecified]: 2.90584e-11 kg
- Acetone [air, urban air close to ground]: 4.03746e-14 kg
- Ammonia [air, unspecified]: 1.28233e-8 kg
- Ammonia [air, urban air close to ground]: 2.88443e-14 kg
- Arsenic ion [air, unspecified]: 2.72837e-12 kg
- Arsenic ion [air, urban air close to ground]: 3.49913e-15 kg
- Benzene [air, unspecified]: 3.90027e-10 kg
- Benzene [air, urban air close to ground]: 9.82556e-13 kg
- Benzene, ethyl- [air, unspecified]: 6.29938e-12 kg
- Benzene, ethyl- [air, urban air close to ground]: 1.20357e-10 kg
- Benzene, hexachloro- [air, unspecified]: 1.51185e-18 kg
- Benzo(a)pyrene [air, unspecified]: 4.5915e-12 kg
- Benzo(a)pyrene [air, urban air close to ground]: 3.69169e-17 kg
- Bromine [air, unspecified]: 1.25988e-11 kg
- Butane [air, unspecified]: 2.3361e-10 kg
- Butane [air, urban air close to ground]: 1.76982e-12 kg
- Cadmium II [air, unspecified]: 1.06501e-11 kg
- Calcium [air, unspecified]: 1.24969e-9 kg
- Calcium [air, urban air close to ground]: 2.9608e-14 kg
- Carbon dioxide, fossil [air, non-urban air or from high stacks]: 0.000175542 kg
- Carbon dioxide, fossil [air, unspecified]: 0.00136059 kg
- Carbon dioxide, fossil [air, urban air close to ground]: 1.10283e-6 kg
- Carbon dioxide, non-fossil [air, non-urban air or from high stacks]: 0.000361131 kg
- Carbon dioxide, non-fossil [air, unspecified]: 0.000693853 kg
- Carbon dioxide, non-fossil [air, urban air close to ground]: 4.53346e-6 kg
- Carbon monoxide, fossil [air, non-urban air or from high stacks]: 9.03428e-8 kg
- Carbon monoxide, fossil [air, unspecified]: 9.9651e-6 kg
- Carbon monoxide, fossil [air, urban air close to ground]: 7.72624e-12 kg
- Carbon monoxide, non-fossil [air, unspecified]: 5.29877e-8 kg
- Chlorine [air, unspecified]: 6.52449e-10 kg
- Chloroethylene [air, unspecified]: 2.42073e-8 kg
- Chloroform [air, unspecified]: 1.69719e-9 kg
- Chromium III [air, unspecified]: 1.29662e-10 kg
- Chromium III [air, urban air close to ground]: 1.33236e-15 kg
- Chromium VI [air, unspecified]: 1.80853e-14 kg
- Chromium VI [air, urban air close to ground]: 1.34582e-17 kg
- Cobalt II [air, unspecified]: 6.39282e-12 kg
- Cobalt II [air, urban air close to ground]: 8.88241e-15 kg
- Copper ion [air, unspecified]: 2.48973e-10 kg
- Copper ion [air, urban air close to ground]: 1.26352e-13 kg
- Dinitrogen monoxide [air, non-urban air or from high stacks]: 6.20319e-8 kg
- Dinitrogen monoxide [air, unspecified]: 2.95658e-8 kg
- Dinitrogen monoxide [air, urban air close to ground]: 5.64927e-13 kg
- Dioxins, measured as 2,3,7,8-tetrachlorodibenzo-p-dioxin [air, unspecified]: 2.78295e-16 kg
- Dioxins, measured as 2,3,7,8-tetrachlorodibenzo-p-dioxin [air, urban air close to ground]: 2.73077e-22 kg
- Ethane, 1,1-difluoro-, HFC-152a [air, urban air close to ground]: 7.92832e-7 kg
- Ethane, 1,2-dichloro- [air, unspecified]: 5.37156e-8 kg
- Ethane, hexafluoro-, HFC-116 [air, unspecified]: 1.52365e-11 kg
- Ethanol [air, unspecified]: 5.81167e-11 kg
- Ethanol [air, urban air close to ground]: 8.07493e-14 kg
- Ethylene [air, unspecified]: 5.14935e-7 kg
- Ethylene [air, urban air close to ground]: 5.09127e-8 kg
- Fluorine [air, unspecified]: 1.0499e-11 kg
- Formaldehyde [air, unspecified]: 3.45224e-9 kg
- Formaldehyde [air, urban air close to ground]: 5.23025e-13 kg
- Heat, waste [air, non-urban air or from high stacks]: 0.00369441 MJ
- Heat, waste [air, unspecified]: 2.95152e-6 MJ
- Heptane [air, urban air close to ground]: 1.17749e-9 kg
- Hydrocarbons, aliphatic, alkanes, unspecified [air, unspecified]: 1.00986e-6 kg
- Hydrocarbons, aliphatic, alkanes, unspecified [air, urban air close to ground]: 2.45187e-13 kg
- Hydrocarbons, aliphatic, unsaturated [air, unspecified]: 6.56747e-10 kg
- Hydrocarbons, aliphatic, unsaturated [air, urban air close to ground]: 8.07493e-15 kg
- Hydrocarbons, aromatic [air, unspecified]: 3.04027e-11 kg
- Hydrocarbons, aromatic [air, urban air close to ground]: 4.56273e-14 kg
- Hydrochloric acid [air, non-urban air or from high stacks]: 4.97572e-9 kg
- Hydrochloric acid [air, unspecified]: 1.12814e-6 kg
- Hydrochloric acid [air, urban air close to ground]: 4.03986e-13 kg
- Hydrogen [air, unspecified]: 1.3034e-9 kg
- Hydrogen fluoride [air, non-urban air or from high stacks]: 1.16401e-8 kg
- Hydrogen fluoride [air, unspecified]: 8.97148e-7 kg
- Hydrogen fluoride [air, urban air close to ground]: 1.44891e-14 kg
- Hydrogen sulfide [air, unspecified]: 1.6563e-13 kg
- Iron ion [air, unspecified]: 7.52196e-10 kg
- Iron ion [air, urban air close to ground]: 2.20715e-13 kg
- Lead II [air, unspecified]: 3.02294e-9 kg
- Lead II [air, urban air close to ground]: 3.90288e-14 kg
- Magnesium [air, unspecified]: 7.55925e-11 kg
- Manganese II [air, unspecified]: 1.07752e-9 kg
- Mercury II [air, non-urban air or from high stacks]: 2.48376e-12 kg
- Mercury II [air, unspecified]: 1.13036e-11 kg
- Mercury II [air, urban air close to ground]: 2.01046e-16 kg
- Methane, fossil [air, non-urban air or from high stacks]: 6.71583e-9 kg
- Methane, fossil [air, unspecified]: 1.35076e-8 kg
- Methane, fossil [air, urban air close to ground]: 5.88155e-12 kg
- Methane, non-fossil [air, non-urban air or from high stacks]: 3.88409e-7 kg
- Methane, non-fossil [air, unspecified]: 1.07962e-7 kg
- Methane, tetrachloro-, R-10 [air, unspecified]: 9.01531e-10 kg
- Methane, tetrafluoro-, R-14 [air, unspecified]: 2.63323e-10 kg
- Methanol [air, non-urban air or from high stacks]: 3.36722e-10 kg
- Methanol [air, unspecified]: 7.39038e-10 kg
- Methanol [air, urban air close to ground]: 1.24345e-10 kg
- Molybdenum VI [air, unspecified]: 1.54978e-12 kg
- Molybdenum VI [air, urban air close to ground]: 2.15332e-15 kg
- Monochloroethane [air, unspecified]: 1.41734e-9 kg
- NMVOC, non-methane volatile organic compounds [air, non-urban air or from high stacks]: 2.98134e-6 kg
- NMVOC, non-methane volatile organic compounds [air, unspecified]: 0.000547734 kg
- Nickel II [air, unspecified]: 6.83022e-10 kg
- Nickel II [air, urban air close to ground]: 1.3189e-13 kg
- Nitrogen oxides [air, non-urban air or from high stacks]: 8.77125e-7 kg
- Nitrogen oxides [air, unspecified]: 1.49696e-5 kg
- Nitrogen oxides [air, urban air close to ground]: 7.94863e-11 kg
- PAH, polycyclic aromatic hydrocarbons [air, unspecified]: 4.47424e-9 kg
- PAH, polycyclic aromatic hydrocarbons [air, urban air close to ground]: 2.47557e-14 kg
- Palladium II [air, unspecified]: 5.74052e-12 kg
- Particulate Matter, < 2.5 um [air, non-urban air or from high stacks]: 2.27259e-6 kg
- Particulate Matter, < 2.5 um [air, unspecified]: 3.40258e-6 kg
- Particulate Matter, < 2.5 um [air, urban air close to ground]: 2.76838e-12 kg
- Particulate Matter, > 10 um [air, non-urban air or from high stacks]: 2.50412e-5 kg
- Particulate Matter, > 10 um [air, unspecified]: 0.00101205 kg
- Particulate Matter, > 10 um [air, urban air close to ground]: 6.45994e-13 kg
- Particulate Matter, > 2.5 um and < 10um [air, non-urban air or from high stacks]: 9.63904e-6 kg
- Particulate Matter, > 2.5 um and < 10um [air, unspecified]: 0.000290757 kg
- Particulate Matter, > 2.5 um and < 10um [air, urban air close to ground]: 3.22997e-13 kg
- Pentane [air, unspecified]: 3.85687e-10 kg
- Pentane [air, urban air close to ground]: 2.97644e-12 kg
- Phenol, pentachloro- [air, unspecified]: 1.70083e-15 kg
- Phosphorus [air, unspecified]: 6.29938e-11 kg
- Potassium I [air, unspecified]: 4.91351e-9 kg
- Propane [air, unspecified]: 6.94252e-11 kg
- Propane [air, urban air close to ground]: 5.0155e-13 kg
- Propene [air, unspecified]: 2.75673e-8 kg
- Propionic acid [air, unspecified]: 6.27126e-12 kg
- Propionic acid [air, urban air close to ground]: 4.8997e-14 kg
- Propylene oxide [air, urban air close to ground]: 2.26058e-10 kg
- Selenium IV [air, unspecified]: 2.33349e-12 kg
- Selenium IV [air, urban air close to ground]: 3.22997e-15 kg
- Silver I [air, non-urban air or from high stacks]: 1.41812e-12 kg
- Sodium [air, unspecified]: 4.18265e-10 kg
- Sodium [air, urban air close to ground]: 2.01874e-13 kg
- Sulfur dioxide [air, non-urban air or from high stacks]: 2.36162e-8 kg
- Sulfur dioxide [air, unspecified]: 6.52272e-6 kg
- Sulfur dioxide [air, urban air close to ground]: 1.15565e-10 kg
- Sulfur hexafluoride [air, unspecified]: 7.25655e-11 kg
- Toluene [air, unspecified]: 1.60955e-10 kg
- Toluene [air, urban air close to ground]: 1.06825e-10 kg
- Trichloroethylene [air, unspecified]: 5.63334e-10 kg
- Vanadium V [air, unspecified]: 4.02993e-9 kg
- Vanadium V [air, urban air close to ground]: 2.69165e-13 kg
- Water [air, non-urban air or from high stacks]: 2.4187e-7 m3
- Water [air, unspecified]: 0.00374574 m3
- Water [air, urban air close to ground]: 7.35461e-6 m3
- Xylene [air, unspecified]: 2.80931e-11 kg
- Xylene [air, urban air close to ground]: 1.06322e-10 kg
- Zinc II [air, unspecified]: 2.59212e-9 kg
- Zinc II [air, urban air close to ground]: 1.3685e-13 kg
- m-Xylene [air, unspecified]: 2.51975e-11 kg
- Boron [soil, unspecified]: 5.97512e-10 kg
- Copper ion [soil, unspecified]: 2.10775e-9 kg
- Fluoride [soil, unspecified]: 2.28498e-9 kg
- Hydrocarbons, unspecified [soil, unspecified]: 1.37989e-6 kg
- Oils, unspecified [soil, unspecified]: 3.51819e-7 kg
- AOX, Adsorbable Organic Halogen [water, ground-]: 2.3416e-8 kg
- AOX, Adsorbable Organic Halogen [water, surface water]: 3.29973e-8 kg
- AOX, Adsorbable Organic Halogen [water, unspecified]: 1.23695e-9 kg
- Aluminium III [water, unspecified]: 1.91434e-5 kg
- Ammonium [water, ground-]: 9.08135e-9 kg
- Ammonium [water, unspecified]: 2.46489e-9 kg
- Aniline [water, ground-]: 1.36322e-9 kg
- Aniline [water, unspecified]: 2.49155e-11 kg
- Antimony ion [water, ground-]: 3.17406e-11 kg
- Antimony ion [water, unspecified]: 1.26955e-13 kg
- Arsenic ion [water, ground-]: 2.38719e-8 kg
- Arsenic ion [water, surface water]: 1.55911e-13 kg
- Arsenic ion [water, unspecified]: 9.21913e-11 kg
- BOD5, Biological Oxygen Demand [water, ground-]: 3.47108e-7 kg
- BOD5, Biological Oxygen Demand [water, surface water]: 8.11752e-6 kg
- BOD5, Biological Oxygen Demand [water, unspecified]: 8.92042e-6 kg
- Benzene, hexachloro- [water, unspecified]: 7.31466e-14 kg
- Benzene, pentachloro- [water, unspecified]: 1.20027e-13 kg
- COD, Chemical Oxygen Demand [water, ground-]: 1.38592e-6 kg
- COD, Chemical Oxygen Demand [water, surface water]: 3.30051e-5 kg
- COD, Chemical Oxygen Demand [water, unspecified]: 1.38459e-5 kg
- Cadmium II [water, ground-]: 3.99124e-9 kg
- Cadmium II [water, surface water]: 7.79475e-14 kg
- Cadmium II [water, unspecified]: 9.57162e-9 kg
- Calcium II [water, surface water]: 2.24533e-5 kg
- Chloride [water, surface water]: 0.000101786 kg
- Chloride [water, unspecified]: 9.19549e-5 kg
- Chlorine [water, ground-]: 2.81339e-9 kg
- Chlorine [water, unspecified]: 3.7451e-11 kg
- Chloroethylene [water, unspecified]: 3.53576e-11 kg
- Chloroform [water, unspecified]: 9.41174e-12 kg
- Chromium III [water, ground-]: 4.61306e-9 kg
- Chromium III [water, surface water]: 1.2468e-12 kg
- Chromium III [water, unspecified]: 1.15392e-10 kg
- Chromium VI [water, ground-]: 4.6193e-10 kg
- Chromium VI [water, unspecified]: 1.93487e-10 kg
- Cobalt II [water, surface water]: 1.55911e-13 kg
- Copper ion [water, ground-]: 6.59376e-9 kg
- Copper ion [water, surface water]: 1.55911e-13 kg
- Copper ion [water, unspecified]: 1.91692e-7 kg
- Cyanide [water, ground-]: 8.50481e-10 kg
- Cyanide [water, unspecified]: 4.99815e-12 kg
- DOC, Dissolved Organic Carbon [water, surface water]: 5.45747e-6 kg
- DOC, Dissolved Organic Carbon [water, unspecified]: 4.38083e-6 kg
- Dioxins, measured as 2,3,7,8-tetrachlorodibenzo-p-dioxin [water, unspecified]: 2.61538e-17 kg
- Dissolved solids [water, ground-]: 5.0222e-6 kg
- Dissolved solids [water, unspecified]: 7.45239e-8 kg
- Ethane, 1,2-dichloro- [water, unspecified]: 7.84335e-11 kg
- Fluoride [water, ground-]: 4.0056e-9 kg
- Fluoride [water, unspecified]: 1.33061e-9 kg
- Heat, waste [water, surface water]: 0.00136394 MJ
- Hydrocarbons, unspecified [water, unspecified]: 1.37989e-6 kg
- Iron ion [water, ground-]: 5.20143e-9 kg
- Iron ion [water, surface water]: 2.52833e-5 kg
- Iron ion [water, unspecified]: 2.89253e-7 kg
- Lead II [water, ground-]: 2.00087e-10 kg
- Lead II [water, surface water]: 1.55911e-13 kg
- Lead II [water, unspecified]: 2.55257e-7 kg
- Magnesium [water, surface water]: 1.32018e-7 kg
- Manganese II [water, ground-]: 4.12099e-9 kg
- Manganese II [water, surface water]: 4.67652e-11 kg
- Manganese II [water, unspecified]: 1.63356e-6 kg
- Mercury II [water, ground-]: 4.86392e-11 kg
- Mercury II [water, surface water]: 2.02636e-14 kg
- Mercury II [water, unspecified]: 2.91159e-13 kg
- Methane, tetrachloro-, R-10 [water, unspecified]: 5.76679e-12 kg
- Nickel II [water, ground-]: 6.04768e-9 kg
- Nickel II [water, surface water]: 1.55911e-13 kg
- Nickel II [water, unspecified]: 2.78219e-6 kg
- Nitrate [water, ground-]: 2.54216e-9 kg
- Nitrate [water, surface water]: 6.61156e-5 kg
- Nitrate [water, unspecified]: 9.33936e-10 kg
- Nitrogen [water, ground-]: 2.28266e-7 kg
- Nitrogen [water, unspecified]: 7.75937e-8 kg
- Nitrogen, organic bound [water, unspecified]: 7.09553e-9 kg
- Oils, unspecified [water, ground-]: 4.72148e-8 kg
- Oils, unspecified [water, unspecified]: 7.5047e-9 kg
- PAH, polycyclic aromatic hydrocarbons [water, unspecified]: 9.29832e-13 kg
- Phenol [water, ground-]: 2.2742e-9 kg
- Phenol [water, unspecified]: 2.49907e-11 kg
- Phosphate [water, surface water]: 3.57738e-6 kg
- Phosphorus [water, ground-]: 2.06504e-8 kg
- Phosphorus [water, surface water]: 1.87061e-11 kg
- Phosphorus [water, unspecified]: 1.04326e-8 kg
- Potassium I [water, surface water]: 5.33206e-5 kg
- Selenium IV [water, ground-]: 8.76398e-10 kg
- Selenium IV [water, unspecified]: 1.24954e-12 kg
- Silicon [water, surface water]: 1.48887e-7 kg
- Sodium I [water, surface water]: 6.60012e-5 kg
- Sodium I [water, unspecified]: 0.000553902 kg
- Sulfate [water, surface water]: 5.18312e-5 kg
- Sulfate [water, unspecified]: 0.00144249 kg
- Sulfide [water, ground-]: 5.63069e-9 kg
- Sulfide [water, unspecified]: 7.46728e-11 kg
- Suspended solids, unspecified [water, ground-]: 4.17512e-7 kg
- Suspended solids, unspecified [water, surface water]: 9.98423e-10 kg
- Suspended solids, unspecified [water, unspecified]: 8.53469e-8 kg
- TOC, Total Organic Carbon [water, ground-]: 8.57106e-8 kg
- TOC, Total Organic Carbon [water, surface water]: 8.92378e-6 kg
- TOC, Total Organic Carbon [water, unspecified]: 4.29512e-6 kg
- Tin ion [water, unspecified]: 1.59523e-6 kg
- Titanium ion [water, unspecified]: 8.28148e-11 kg
- Vanadium V [water, ground-]: 8.30032e-10 kg
- Vanadium V [water, unspecified]: 4.99815e-12 kg
- Water [water, ocean]: 2.90437e-7 m3
- Water [water, surface water]: 4.17322e-5 m3
- Water [water, unspecified]: 0.000140074 m3
- Zinc II [water, ground-]: 1.06384e-8 kg
- Zinc II [water, surface water]: 6.23563e-13 kg
- Zinc II [water, unspecified]: 5.74789e-7 kg
