# treatment of wastewater, unpolluted, wastewater treatment

Dataset: EcoSpold 2, unit process
Geography: RoW
Time period: 2010-01-01 to 2022-12-31
Technology level: current
Classification: ISIC rev.4 ecoinvent: 3700:Sewerage
Scenario: Business-as-Usual
System model: Allocation at the point of substitution
Generated by: Nikolia Stoikou
Database: ecoinvent
isCopyrightProtected: true

## General comment
This dataset represents the treatment of a wastewater, generated from an ordinary transforming activity. Purification in wastewater treatment of 'wastewater, unpolluted'. Recommended use of this dataset: to be used for wastewaters, generated from ordinary transforming activities, of equal or similar composition. The wastewater has a content of TOC: 0 kg/m3, COD: 0 kg/m3 and BOD: 0 kg/m3. TOC is equal to C present in the wastewater, COD is calculated as TOC/0.2565 and BOD is calculated as COD/0.53034. Detailed elemental composition can be found in the properties of the wastewater treated. Share of biogenic carbon in the sludge: 0%.

## Included activities start
The activity starts with the wastewater being available at the gate of the treatment facility. Collection and transportation of the wastewater to the treatment plant is not included.

## Included activities end
The activity ends with the wastewater being treated and waste-specific emissions released to the environment. Expenditures from treatment of wastewater in waste treatment plant are included as well as relevant infrastructure of the plant. Emissions from any sludge digestion, biogas generation and utilization (heeding specific wastewater composition) are also included. Waste-specific direct emissions of untreated wastewater and required territory-specific infrastructure for sewers are not contained within this dataset but instead in the regional market datasets for this wastewater.

## Geography
The site has mean annual temperature (MAT) of 16.743579766537 degC, mean annual precipitation (MAP) of 1250.84108527132 mm/year, mean annual actual evaporation (EAT) of 460.58904958214 mm/year. In the WWT plant, 0% of its water input are lost due to evaporation from pools, 0% of water is *gained* from organic mass degradation, and 0% is removed off site via sludge disposal.

## Technology
This is an inventory for the disposal of a selected wastewater in Global. The reference unit is 1 m3 wastewater input. This activity represents the treatment of a specific wastewater in a WWT plant (while direct emissions and sewering are heeded in the upstream market dataset for this wastewater). The size of the treatment plant infrastructure is for a supranational region average territory situation. The assumed size of the WWTP treats 82.2 Mio m3 per year. The mixture of WWTP with one, two, or three stages is 8.2%-41.2%-50.6%. The actual, waste-specific oxygen requirement in the biological stages is 0 kg O. The digestion process produces 0 litres of biogas with an energy content of 0MJ. 60.5% of the biogas is utilized for energy. The remainder is flared. The gross electric efficiency is 26.564%. The gross thermal efficiency is 47.853%. After digestion, the remaining total sludge mass (dry matter) is 0kg DM.

## Reference product
- iron scrap, sorted, pressed: 1 kg; By-product classification Recyclable; CPC 39310: Slag, dross, scalings and other waste from the manufacture of iron or steel; lognormal variance with pedigree 0.3611, pedigree (1,1,1,1,1)
  scrap output from used infrastructure for wastewater treatment plant.
  Uncertainty: Uncertainty calculated from wastewater technosphere fate uncertainty and treatment infrastructure uncertainty.
  production volume 2.41204e7 kg
    Calculated in proportion to wastewater reference product.
  property price 0.175 EUR2005
    Temporary price data. Calculated as 90% of purchasers price based on: 2005 import and export prices (total trades (USD) divided by total weight (kg) in biggest economies of the world: EU27, USA, Brasil, China, India, Japan and Russia) from UN Commodity Trade Statistics Database (http://data.un.org/Explorer.aspxDatabase [Accessed 2011.06.20]). Commodity: Waste or scrap, of cast iron
  properties: carbon allocation 0 kg, carbon content 0, carbon content, fossil 0, carbon content, non-fossil 0, dry mass 1 kg, water content 0, water in wet mass 0 kg, wet mass 1 kg

## Inputs from technosphere
- 4-methyl-2-pentanone: 1.7854e-7 kg
- EDTA, ethylenediaminetetraacetic acid: 3.155e-7 kg
- acetic acid, without water, in 98% solution state: 0.000953499 kg
- acrylic dispersion, with water, in 58% solution state: 2.70283e-9 kg
- acrylic varnish, with water, in 53% solution state: 8.88073e-10 kg
- acrylonitrile-butadiene-styrene copolymer: 1.51367e-7 kg
- activated carbon, granular: 4.65177e-5 kg
- activated silica: 3.94113e-5 kg
- alkylketene dimer sizing agent, for paper production: 1.26603e-6 kg
- aluminium scrap, post-consumer: -5.6555e-8 kg
- aluminium sulfate, powder: 0.0040796, 0.00130933 kg (2 suppliers, which the file names only by identifier); sum of these 0.00538894 kg
- aluminium sulfate, without water, in 4.33% aluminium solution state: 0.000215465 kg
- aluminium, cast alloy: 1.37811e-7 kg
- aluminium, wrought alloy: 0.000115096 kg
- ammonia, anhydrous, liquid: 7.52047e-9, 7.88226e-10, 7.67602e-9, 2.89687e-8, 3.87413e-9, 3.52366e-9, 8.33596e-8, 2.49021e-9 kg (8 suppliers, which the file names only by identifier); sum of these 1.38201e-7 kg
- ammonium bicarbonate: 7.9345e-7 kg
- anode, for metal electrolysis: 2.7913e-8 kg
- ash from paper production sludge: -2.00175e-6 kg
- bark: -4.41029e-6 kg
- battery, Li-ion, NCA, rechargeable, prismatic: 3.88569e-7 kg
- benzene: 2.1645e-7 kg
- blast furnace sludge: -7.55954e-7, -1.51694e-5 kg (2 suppliers, which the file names only by identifier); sum of these -1.59253e-5 kg
- blasting: 1.17989e-5 kg
- brass: 6.679e-10, 3.35628e-12 kg (2 suppliers, which the file names only by identifier); sum of these 6.71256e-10 kg
- building, hall: 2.3467e-7 m2
- building, hall, steel construction: 1.34134e-12 m2
- building, multi-storey: 4.32064e-7 m3
- cable, connector for computer, without plugs: 7.11346e-7 m
- cable, ribbon cable, 20-pin, with plugs: 8.62378e-10 kg
- carbon dioxide, liquid: 1.32217e-6 kg
- cast iron: 6.75684e-8 kg
- casting, brass: 6.71256e-10 kg
- chemical factory, organics: 2.81382e-11 unit
- chemical, inorganic: 0.000370655 kg
- chemical, organic: 0.0029951 kg
- chlorine dioxide: 4.26462e-6, 2.39791e-6 kg (2 suppliers, which the file names only by identifier); sum of these 6.66253e-6 kg
- chlorine, gaseous: 0.00127305 kg
- chlorine, liquid: 0.000119767, 7.82827e-5 kg (2 suppliers, which the file names only by identifier); sum of these 0.00019805 kg
- chromium oxide, flakes: 1.79795e-7 kg
- compressed air, 600 kPa gauge: 0.000455435 m3
- concrete, 25-30MPa: 4.65862e-7 m3
- concrete, 25MPa: 3.38993e-8, 1.46784e-8, 5.6436e-6, 6.85495e-9, 2.32082e-7, 2.28381e-7 m3 (6 suppliers, which the file names only by identifier); sum of these 6.1595e-6 m3
- concrete, medium strength: 5.86754e-9 m3
- copper concentrate, sulfide ore: 0.000105929 kg
- copper slag: -4.67085e-5 kg
- copper sulfate: 2.34663e-6 kg
- copper, cathode: 3.50553e-8 kg
- corrugated board box: 6.3552e-8, 1.47511e-7, 3.54302e-9, 2.36732e-9 kg (4 suppliers, which the file names only by identifier); sum of these 2.16973e-7 kg
- decarbonising waste: -0.00645475 kg
- decommissioned airport infrastructure, contaminated gravel: -2.66706e-13 unit
- diesel: 7.4488e-6, 3.69076e-6, 7.5414e-7, 5.21758e-7, 7.35532e-5, 1.7743e-7 kg (6 suppliers, which the file names only by identifier); sum of these 8.61461e-5 kg
- diesel, burned in building machine: 0.00495572 MJ
- diesel, burned in diesel-electric generating set, 18.5kW: 3.74395e-8 MJ
- electric connector, peripheral type buss: 8.90347e-9 kg
- electricity, high voltage: 4.95891e-8, 6.01504e-9, 2.06906e-7, 1.4391e-8, 3.58033e-8, 6.57682e-7, 1.43647e-7, 1.04986e-8, 1.80068e-7, 7.28618e-9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 kWh (66 suppliers, which the file names only by identifier); sum of these 2.37352e-5 kWh
- electricity, low voltage: 4.60687e-6, 3.98136e-5, 1.25076e-6, 4.16183e-6, 5.60387e-6, 3.85417e-6, 2.12643e-5, 7.56137e-5, 0.000235738, 4.09179e-5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 kWh (48 suppliers, which the file names only by identifier); sum of these 0.0150572 kWh
- electricity, medium voltage: 4.52396e-5, 6.10849e-5, 1.58283e-6, 8.104e-5, 1.83384e-5, 4.4548e-6, 3.14401e-6, 1.4162e-5, 0.00107414, 4.25844e-7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 kWh (147 suppliers, which the file names only by identifier); sum of these 0.36722 kWh
- electronic component, passive, mobile, earpiece and speaker: 8.58728e-9 kg
- electronic component, passive, unspecified: 1.01388e-8 kg
- epoxy resin, liquid: 8.8862e-7, 7.43654e-7 kg (2 suppliers, which the file names only by identifier); sum of these 1.63227e-6 kg
- ethoxylated alcohol (AE3): 0.00018423 kg
- ethoxylated alcohol (AE7): 0.000118833, 0.000748347 kg (2 suppliers, which the file names only by identifier); sum of these 0.000867181 kg
- ethylene: 0.00500205, 8.02566e-5 kg (2 suppliers, which the file names only by identifier); sum of these 0.0050823 kg
- ethylene dichloride: 0.000416262 kg
- ethylene glycol: 1.0935e-5 kg
- ethylene glycol monoethyl ether: 1.19015e-9 kg
- excavation, hydraulic digger: 6.36568e-11 m3
- excavation, skid-steer loader: 1.99229e-8 m3
- extrusion of plastic sheets and thermoforming, inline: 2.45304e-8 kg
- extrusion, plastic pipes: 2.33667e-7 kg
- fan, for power supply unit, desktop computer: 1.06174e-8 kg
- ferrite: 7.92456e-11 kg
- flat glass, coated: 1.88363e-8, 3.81412e-8 kg (2 suppliers, which the file names only by identifier); sum of these 5.69775e-8 kg
- fluosilicic acid, without water, in 22% solution state: 1.26003e-5 kg
- glass fibre: 2.091e-5 kg
- glass fibre reinforced plastic, polyester resin, hand lay-up: 3.63131e-9 kg
- glued laminated timber, average glue mix: 1.08266e-10, 2.35065e-10 m3 (2 suppliers, which the file names only by identifier); sum of these 3.43331e-10 m3
- gravel, crushed: 1.25032e-6, 4.79917e-6, 2.50037e-8, 2.73116e-7 kg (4 suppliers, which the file names only by identifier); sum of these 6.34761e-6 kg
- hazardous waste, for incineration: -0.000107075 kg
- heat, central or small-scale, other than natural gas: 1.45585e-5, 0.00195854 MJ (2 suppliers, which the file names only by identifier); sum of these 0.0019731 MJ
- heat, district or industrial, natural gas: 0.141032, 0.00620717, 0.030447, 0.000249445, 2.76608e-9 MJ (5 suppliers, which the file names only by identifier); sum of these 0.177935 MJ
- heat, district or industrial, other than natural gas: 0.482064, 6.03747e-9, 0.00248612, 0.241286 MJ (4 suppliers, which the file names only by identifier); sum of these 0.725836 MJ
- heat, from steam, in chemical industry: 0.00385353 MJ
- heavy fuel oil: 6.69542e-6, 5.6339e-8, 2.86417e-7, 3.71383e-7, 7.22747e-8, 9.67504e-8 kg (6 suppliers, which the file names only by identifier); sum of these 7.57859e-6 kg
- hydrochloric acid, without water, in 30% solution state: 7.90703e-5, 0.000416215 kg (2 suppliers, which the file names only by identifier); sum of these 0.000495286 kg
- hydrogen peroxide, without water, in 50% solution state: 0.00225588, 0.000470683 kg (2 suppliers, which the file names only by identifier); sum of these 0.00272656 kg
- hydrogen, liquid: 1.42338e-6 kg
- inductor, miniature radio frequency chip: 2.82021e-10 kg
- industrial machine, heavy, unspecified: 4.9514e-10 kg
- inert waste: -9.89262e-10 kg
- injection moulding: 5.42074e-8 kg
- integrated circuit, logic type: 5.59741e-9 kg
- integrated circuit, memory type: 6.05268e-9 kg
- ion-exchanger for water treatment: 1.09771e-9 unit
- iron (III) chloride, without water, in 40% solution state: 1.61578e-6 kg
- iron sulfate: 1.9759e-8 kg
- iron(III) chloride, without water, in 14% iron solution state: 2.87169e-6 kg
- iron(III) sulfate, without water, in 12.5% iron solution state: 0.000492803 kg
- isopropanol: 4.9514e-9 kg
- kaolin: 1.56212e-5 kg
- latex: 8.51221e-6 kg
- light fuel oil: 1.4294e-6, 1.41879e-7, 1.36419e-8, 1.01382e-8, 9.41494e-9, 7.02986e-8 kg (6 suppliers, which the file names only by identifier); sum of these 1.67477e-6 kg
- lime: 1.04534e-7, 1.21033e-6 kg (2 suppliers, which the file names only by identifier); sum of these 1.31486e-6 kg
- lime, hydrated, loose weight: 0.000592696 kg
- lime, hydrated, packed: 1.38435e-6, 1.21761e-7 kg (2 suppliers, which the file names only by identifier); sum of these 1.50611e-6 kg
- lime, packed: 4.00929e-8, 9.3453e-5 kg (2 suppliers, which the file names only by identifier); sum of these 9.34931e-5 kg
- limestone residue: -3.69739e-6 kg
- liquefied petroleum gas: 5.50002e-7 kg
- liquid crystal display, unmounted, mobile device: 4.5095e-7 kg
- lubricating oil: 0.00170015, 2.20814e-6 kg (2 suppliers, which the file names only by identifier); sum of these 0.00170236 kg
- magnesium oxide: 8.09574e-5 kg
- magnesium sulfate: 1.08164e-7 kg
- magnesium-alloy, AZ91, diecast: 3.39623e-8 kg
- maize starch: 2.868e-5 kg
- medium density fibreboard: 2.24502e-11, 1.43782e-10 m3 (2 suppliers, which the file names only by identifier); sum of these 1.66232e-10 m3
- metal working, average for copper product manufacturing: 1.95597e-8 kg
- metal working, average for metal product manufacturing: 4.01749e-10 kg
- metal working, average for steel product manufacturing: 7.21315e-7 kg
- mine infrastructure, gold and silver: 5.42505e-13 unit
- mine infrastructure, underground, non-ferrous metal: 2.84398e-14 unit
- municipal solid waste: -1.6668e-7, -9.7774e-6, -5.245e-8, -0.000117882, -4.19991e-8 kg (5 suppliers, which the file names only by identifier); sum of these -0.000127921 kg
- natural gas, high pressure: 3.06488e-6, 1.2937e-6, 7.40935e-6, 2.19881e-6, 0.000124389, 1.27135e-5, 1.38778e-6, 4.09515e-8, 4.9278e-6, 5.17478e-6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 m3 (24 suppliers, which the file names only by identifier); sum of these 0.000371958 m3
- nitric acid, without water, in 50% solution state: 9.01691e-5, 0.000133977, 0.000333267, 0.000433286, 0.000159641, 0.000549061, 0.000133481, 9.50831e-6 kg (8 suppliers, which the file names only by identifier); sum of these 0.00184239 kg
- nitrogen, liquid: 0.000452992 kg
- non-ferrous metal smelter: 3.0453e-16 unit
- oxygen, liquid: 0.000911678, 0.00225732 kg (2 suppliers, which the file names only by identifier); sum of these 0.003169 kg
- paper, woodfree, coated: 3.15709e-6 kg
- particleboard, uncoated: 4.51611e-10, 2.18175e-10 m3 (2 suppliers, which the file names only by identifier); sum of these 6.69786e-10 m3
- petrol, unleaded: 1.31179e-7, 1.51047e-5, 4.90739e-7, 5.43899e-7, 1.31606e-7, 2.70218e-8 kg (6 suppliers, which the file names only by identifier); sum of these 1.64291e-5 kg
- petrol, unleaded, burned in machinery: 5.29476e-6 MJ
- phosphoric acid, industrial grade, without water, in 85% solution state: 4.4302e-8 kg
- photovoltaic cell factory: 1.53335e-14 unit
- plug, inlet and outlet, for computer cable: 7.3132e-7 unit
- plywood: 1.53808e-10, 3.2634e-9 m3 (2 suppliers, which the file names only by identifier); sum of these 3.41721e-9 m3
- polyacrylamide: 1.8639e-5 kg
- polyaluminium chloride: 2.39539e-7 kg
- polycarbonate: 1.36507e-7 kg
- polyethylene terephthalate, granulate, amorphous: 7.82034e-9 kg
- polyethylene, low density, granulate: 6.141e-5 kg
- polymethyl methacrylate, beads: 6.91063e-7 kg
- polypropylene, granulate: 6.18816e-8 kg
- potassium nitrate: 9.97894e-8 kg
- potassium permanganate: 1.58192e-5 kg
- potato starch: 1.05563e-5 kg
- power adapter, for laptop: 3.74255e-7 unit
- power adapter, for smartphone: 4.14857e-6 unit
- printed wiring board, mounted mainboard, laptop computer, Pb free: 8.47123e-8 kg
- printed wiring board, mounted mainboard, mobile device, double-sided, Pb free: 1.45249e-8 m2
- printing ink, offset, without solvent, in 47.5% solution state: 2.10548e-8 kg
- propylene: 3.27277e-5, 0.00170873 kg (2 suppliers, which the file names only by identifier); sum of these 0.00174146 kg
- propylene glycol, liquid: 4.37607e-5 kg
- pulpwood, hardwood, measured as solid wood under bark: 4.16648e-7 m3
- pulpwood, softwood, measured as solid wood under bark: 1.36982e-6 m3
- pump station: 1.16901e-11 unit
- quicklime, milled, loose: 1.38985e-5 kg
- quicklime, milled, packed: 6.18282e-9 kg
- reinforcing steel: 0.000535431 kg
- retention aid, for paper production: 4.70652e-8 kg
- rosin size, for paper production: 2.73159e-6, 6.5887e-6 kg (2 suppliers, which the file names only by identifier); sum of these 9.32029e-6 kg
- sawlog and veneer log, eucalyptus ssp., measured as solid wood under bark: 1.44398e-8, 1.01331e-10 m3 (2 suppliers, which the file names only by identifier); sum of these 1.45411e-8 m3
- sawnwood, hardwood, dried (u=10%), planed: 9.58615e-12, 3.8921e-12 m3 (2 suppliers, which the file names only by identifier); sum of these 1.34782e-11 m3
- scrap aluminium: -2.13058e-8, -9.99618e-10, -0.000921196 kg (3 suppliers, which the file names only by identifier); sum of these -0.000921218 kg
- scrap copper: -1.11751e-10 kg
- scrap steel: -2.42352e-10, -4.46553e-6, -1.91285e-7 kg (3 suppliers, which the file names only by identifier); sum of these -4.65706e-6 kg
- seawater reverse osmosis module: 1.69011e-9 m2
- section bar extrusion, aluminium: 2.11935e-7 kg
- sewage sludge: -0.000196636 m3
- sewage sludge, dried: -1.32202e-6 kg
- sheet rolling, aluminium: 1.52114e-7 kg
- sheet rolling, chromium steel: 1.68554e-7 kg
- sheet rolling, copper: 1.53839e-8 kg
- sheet rolling, steel: 3.09359e-8 kg
- silica sand: 0.000162091 kg
- sludge from pulp and paper production: -1.19299e-5 kg
- soda ash, dense: 1.16933e-7 kg
- soda ash, light: 0.000180171 kg
- sodium borates: 2.01718e-6 kg
- sodium chlorate, powder: 0.00026456, 0.00340437 kg (2 suppliers, which the file names only by identifier); sum of these 0.00366893 kg
- sodium chloride, brine solution: 0.000353001 kg
- sodium chloride, powder: 0.0087824 kg
- sodium cyanide: 0.00014104 kg
- sodium dithionite, anhydrous: 1.71559e-7, 9.28126e-7 kg (2 suppliers, which the file names only by identifier); sum of these 1.09969e-6 kg
- sodium hydrosulfide: 0.000126937 kg
- sodium hydroxide, without water, in 50% solution state: 0.0227056 kg
- sodium hypochlorite, without water, in 15% solution state: 3.27063e-5, 0.000180982 kg (2 suppliers, which the file names only by identifier); sum of these 0.000213688 kg
- sodium nitrate: 3.36499e-7 kg
- sodium phosphate: 2.53016e-5, 7.92606e-6 kg (2 suppliers, which the file names only by identifier); sum of these 3.32277e-5 kg
- sodium pyrophosphate: 7.76059e-6 kg
- sodium silicate, solid: 3.11901e-5, 6.50964e-5 kg (2 suppliers, which the file names only by identifier); sum of these 9.62865e-5 kg
- sodium sulfate, anhydrite: 0.000301287, 4.92108e-5 kg (2 suppliers, which the file names only by identifier); sum of these 0.000350498 kg
- sodium sulfite: 1.33439e-6 kg
- sodium tripolyphosphate: 7.40297e-6 kg
- solvent, organic: 2.64065e-5 kg
- spent activated carbon, granular: -4.48958e-5 kg
- spent solvent mixture: -3.61598e-6, -9.57196e-10 kg (2 suppliers, which the file names only by identifier); sum of these -3.61694e-6 kg
- steam, in chemical industry: 0.026155, 0.148278 kg (2 suppliers, which the file names only by identifier); sum of these 0.174433 kg
- steatite: 3.20433e-7 kg
- steel, chromium steel 18/8: 4.03713e-6 kg
- steel, chromium steel 18/8, hot rolled: 3.09359e-8 kg
- steel, low-alloyed: 2.89998e-9 kg
- steel, low-alloyed, hot rolled: 7.85582e-7 kg
- sulfidic tailings, from gold mine operation: -0.0116049 kg
- sulfidic tailings, from silver mine operation: -0.00556619 kg
- sulfidic tailings, generic: -0.000881809 kg
- sulfur: 1.08344e-6 kg
- sulfur dioxide, liquid: 2.80394e-7 kg
- sulfuric acid: 0.0102735, 0.00039856 kg (2 suppliers, which the file names only by identifier); sum of these 0.010672 kg
- synthetic rubber: 1.63755e-7 kg
- tap water: 0.0109061, 3.65021, 0.00672357, 0.00498106, 1.03974, 8.97355e-9, 0.00929742, 1.43692, 0.00326882, 0.000939466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 kg (11 suppliers, which the file names only by identifier); sum of these 6.18804 kg
- textile, woven cotton: 6.40503e-10 kg
- thermoforming, with calendering: 9.03972e-10 kg
- titanium tetrachloride: 2.29254e-6 kg
- ultrafiltration module: 3.20139e-9 unit
- ultraviolet lamp: 1.52155e-8 unit
- used cable: -8.90197e-8 kg
- used laptop computer: -1.0278e-6 kg
- used smartphone: -5.61547e-7 kg
- used tablet: -3.07533e-7 kg
- vinyl chloride: 0.000380165 kg
- waste bitumen sheet: -0.00168878 kg
- waste bulk iron, excluding reinforcement: -4.01749e-10 kg
- waste emulsion paint: -5.85327e-10, -5.51754e-11 kg (2 suppliers, which the file names only by identifier); sum of these -6.40503e-10 kg
- waste mineral oil: -5.34627e-9, -5.65454e-7, -2.15958e-7 kg (3 suppliers, which the file names only by identifier); sum of these -7.86758e-7 kg
- waste paper, unsorted: -4.42901e-7, -4.42901e-7 kg (2 suppliers, which the file names only by identifier); sum of these -8.85802e-7 kg
- waste paperboard: -7.00169e-9, -4.56661e-9, -8.51761e-7, -4.58512e-8, -1.78484e-9, -2.46697e-9, -2.53001e-8, -6.12235e-10 kg (8 suppliers, which the file names only by identifier); sum of these -9.39345e-7 kg
- waste paperboard, unsorted: -1.00164e-7, -1.00164e-7 kg (2 suppliers, which the file names only by identifier); sum of these -2.00327e-7 kg
- waste plastic, mixture: -1.07228e-6, -5.41845e-9, -1.19549e-8, -7.50656e-6, -7.16457e-8, -2.81006e-8, -2.95922e-8 kg (7 suppliers, which the file names only by identifier); sum of these -8.72555e-6 kg
- waste polyethylene/polypropylene product: -1.74433e-8, -6.88062e-9, -2.0647e-10 kg (3 suppliers, which the file names only by identifier); sum of these -2.45304e-8 kg
- waste rubber, unspecified: -3.35818e-9, -7.99951e-8, -7.99951e-8 kg (3 suppliers, which the file names only by identifier); sum of these -1.63348e-7 kg
- waste textile, soiled: -1.51305e-8, -2.26465e-10 kg (2 suppliers, which the file names only by identifier); sum of these -1.5357e-8 kg
- waste wood, post-consumer: -1.61313e-6, -1.61313e-6 kg (2 suppliers, which the file names only by identifier); sum of these -3.22627e-6 kg
- waste wood, untreated: -1.49035e-6, -1.36746e-5, -2.03847e-5, -0.00219077, -8.64979e-6, -5.72546e-5, -0.000164175 kg (7 suppliers, which the file names only by identifier); sum of these -0.0024564 kg
- waste yarn and waste textile: -0.00250724 kg
- wastewater from concrete production: -8.03002e-10, -1.78671e-7 m3 (2 suppliers, which the file names only by identifier); sum of these -1.79474e-7 m3
- wastewater, average: -3.57132e-8, -1.00307e-5 m3 (2 suppliers, which the file names only by identifier); sum of these -1.00664e-5 m3
- wastewater, unpolluted: -1.84978e-5, -0.0377418 m3 (2 suppliers, which the file names only by identifier); sum of these -0.0377603 m3
- water pump operation, diesel: 7.75229e-6, 2.3636e-5, 0.000106888, 3.0997e-6, 7.43836e-6 MJ (5 suppliers, which the file names only by identifier); sum of these 0.000148814 MJ
- water works, capacity 1.1E10l/year: 4.34029e-11, 1.25763e-12, 2.73843e-12, 1.59572e-11, 1.42396e-11, 1.10533e-12, 9.19338e-11, 9.40955e-14, 3.3209e-13, 2.77914e-13 unit (10 suppliers, which the file names only by identifier); sum of these 1.71339e-10 unit
- water, decarbonised: 18.2368, 0.237708, 0.119303, 15.4806, 9.80116, 1.24809, 0.933937 kg (7 suppliers, which the file names only by identifier); sum of these 46.0575 kg
- water, deionised: 4.4302e-5 kg
- white spirit: 7.68318e-6 kg
- wire drawing, copper: 1.11751e-10 kg
- wood chips, dry, measured as dry mass: 0.00183696 kg
- wood chips, wet, measured as dry mass: 8.17774e-7, 0.000360926 kg (2 suppliers, which the file names only by identifier); sum of these 0.000361744 kg
- wooden board factory, organic bonded boards: 4.51358e-17 unit
- yarn, cotton: 0.000806548 kg
- zinc: 8.3704e-7 kg
- zinc monosulfate: 6.72998e-6 kg

## Inputs from nature
- Gangue [natural resource, in ground]: 0.0139759 kg
- Gold [natural resource, in ground]: 9.51606e-9 kg
- Lead [natural resource, in ground]: 5.16004e-5 kg
- Magnesium [natural resource, in ground]: 0.000538955 kg
- Occupation, industrial area [natural resource, land]: 0.000158218 m2*year
- Occupation, mineral extraction site [natural resource, land]: 3.54999e-10 m2*year
- Occupation, traffic area, road network [natural resource, land]: 7.73448e-5 m2*year
- Oxygen [natural resource, in air]: 0.000839056 kg
- Silver [natural resource, in ground]: 2.89158e-6 kg
- Tin [natural resource, in ground]: 2.13492e-5 kg
- Transformation, from unspecified [natural resource, land]: 2.37573e-6 m2
- Transformation, from unspecified, natural (non-use) [natural resource, land]: 1.01428e-11 m2
- Transformation, to industrial area [natural resource, land]: 1.57358e-6 m2
- Transformation, to mineral extraction site [natural resource, land]: 2.87174e-8 m2
- Transformation, to traffic area, road network [natural resource, land]: 7.73448e-7 m2
- Water, cooling, unspecified natural origin [natural resource, in water]: 0.000375775 m3
- Water, lake [natural resource, in water]: 0.0083754 m3
- Water, river [natural resource, in water]: 0.120513 m3
- Water, unspecified natural origin [natural resource, fossil well]: 4.91009e-5 m3
- Water, unspecified natural origin [natural resource, in water]: 7.70231e-5 m3
- Water, well, in ground [natural resource, in water]: 0.00927133 m3
- Zinc [natural resource, in ground]: 6.58958e-5 kg

## Emissions to nature
- 2-Propanol [air, urban air close to ground]: 4.9514e-9 kg
- Acetaldehyde [air, unspecified]: 4.66527e-11 kg
- Acetic acid [air, unspecified]: 2.59325e-10 kg
- Acetone [air, unspecified]: 4.61546e-11 kg
- Aluminium III [air, non-urban air or from high stacks]: 1.25317e-7 kg
- Ammonia [air, non-urban air or from high stacks]: 3.48102e-8 kg
- Ammonia [air, unspecified]: 4.04907e-8 kg
- Antimony ion [air, non-urban air or from high stacks]: 3.48913e-9 kg
- Arsenic ion [air, non-urban air or from high stacks]: 2.80789e-8 kg
- Arsenic ion [air, unspecified]: 4.00007e-12 kg
- Benzene [air, unspecified]: 2.00286e-10 kg
- Benzene, ethyl- [air, urban air close to ground]: 2.20088e-10 kg
- Benzo(a)pyrene [air, unspecified]: 1.55889e-14 kg
- Butane [air, unspecified]: 3.71052e-10 kg
- Cadmium II [air, non-urban air or from high stacks]: 9.78447e-9 kg
- Cadmium II [air, unspecified]: 1.70281e-12 kg
- Calcium [air, unspecified]: 3.38467e-11 kg
- Carbon dioxide, fossil [air, non-urban air or from high stacks]: 0.000333443 kg
- Carbon dioxide, fossil [air, unspecified]: 0.000884436 kg
- Carbon dioxide, fossil [air, urban air close to ground]: 1.89331e-6 kg
- Carbon dioxide, non-fossil [air, unspecified]: 0.00106639 kg
- Carbon monoxide, fossil [air, non-urban air or from high stacks]: 4.13643e-6 kg
- Carbon monoxide, fossil [air, unspecified]: 5.52614e-7 kg
- Chlorine [air, unspecified]: 2.0231e-9 kg
- Chloroethylene [air, unspecified]: 7.95527e-8 kg
- Chloroform [air, unspecified]: 5.58621e-9 kg
- Chromium III [air, non-urban air or from high stacks]: 9.69249e-11 kg
- Chromium III [air, unspecified]: 1.87242e-11 kg
- Chromium VI [air, unspecified]: 1.53849e-14 kg
- Cobalt II [air, non-urban air or from high stacks]: 8.71602e-11 kg
- Cobalt II [air, unspecified]: 1.0154e-11 kg
- Copper ion [air, non-urban air or from high stacks]: 7.69577e-8 kg
- Copper ion [air, unspecified]: 5.47465e-11 kg
- Dinitrogen monoxide [air, unspecified]: 5.6594e-8 kg
- Dioxins, measured as 2,3,7,8-tetrachlorodibenzo-p-dioxin [air, non-urban air or from high stacks]: 5.5826e-17 kg
- Dioxins, measured as 2,3,7,8-tetrachlorodibenzo-p-dioxin [air, unspecified]: 4.95747e-17 kg
- Ethane, 1,2-dichloro- [air, unspecified]: 1.76802e-7 kg
- Ethanol [air, unspecified]: 9.23092e-11 kg
- Ethylene [air, unspecified]: 1.6941e-6 kg
- Ethylene [air, urban air close to ground]: 7.93658e-8 kg
- Formaldehyde [air, unspecified]: 2.52327e-10 kg
- Heptane [air, urban air close to ground]: 2.15318e-9 kg
- Hydrocarbons, aliphatic, alkanes, unspecified [air, unspecified]: 2.18783e-10 kg
- Hydrocarbons, aliphatic, unsaturated [air, unspecified]: 9.23092e-12 kg
- Hydrocarbons, aromatic [air, unspecified]: 4.82899e-11 kg
- Hydrochloric acid [air, unspecified]: 2.07225e-8 kg
- Hydrogen [air, unspecified]: 4.10539e-9 kg
- Hydrogen fluoride [air, unspecified]: 1.54101e-11 kg
- Iron ion [air, non-urban air or from high stacks]: 2.4726e-12 kg
- Iron ion [air, unspecified]: 2.52312e-10 kg
- Lead II [air, non-urban air or from high stacks]: 1.23107e-6 kg
- Lead II [air, unspecified]: 4.46161e-11 kg
- Magnesium [air, non-urban air or from high stacks]: 2.32969e-14 kg
- Manganese II [air, non-urban air or from high stacks]: 8.37391e-9 kg
- Mercury II [air, non-urban air or from high stacks]: 6.64528e-11 kg
- Mercury II [air, unspecified]: 3.74915e-14 kg
- Methane, fossil [air, non-urban air or from high stacks]: 2.66879e-7 kg
- Methane, fossil [air, unspecified]: 4.20453e-8 kg
- Methane, non-fossil [air, unspecified]: 1.70718e-7 kg
- Methane, tetrachloro-, R-10 [air, unspecified]: 2.96734e-9 kg
- Methanol [air, unspecified]: 1.56926e-10 kg
- Methanol [air, urban air close to ground]: 2.27129e-10 kg
- Molybdenum VI [air, unspecified]: 2.46158e-12 kg
- Monochloroethane [air, unspecified]: 4.66511e-9 kg
- NMVOC, non-methane volatile organic compounds [air, non-urban air or from high stacks]: 6.32135e-6 kg
- NMVOC, non-methane volatile organic compounds [air, unspecified]: 2.25657e-6 kg
- Nickel II [air, non-urban air or from high stacks]: 5.44863e-8 kg
- Nickel II [air, unspecified]: 1.379e-11 kg
- Nitrogen oxides [air, non-urban air or from high stacks]: 1.67498e-6 kg
- Nitrogen oxides [air, unspecified]: 1.35192e-6 kg
- PAH, polycyclic aromatic hydrocarbons [air, unspecified]: 5.2002e-12 kg
- Palladium II [air, unspecified]: 9.1179e-12 kg
- Particulate Matter, < 2.5 um [air, non-urban air or from high stacks]: 2.99119e-6 kg
- Particulate Matter, < 2.5 um [air, unspecified]: 2.90083e-8 kg
- Particulate Matter, > 10 um [air, non-urban air or from high stacks]: 2.7913e-9 kg
- Particulate Matter, > 10 um [air, unspecified]: 1.24381e-7 kg
- Particulate Matter, > 2.5 um and < 10um [air, non-urban air or from high stacks]: 5.20959e-6 kg
- Particulate Matter, > 2.5 um and < 10um [air, unspecified]: 8.55456e-7 kg
- Pentane [air, unspecified]: 6.12602e-10 kg
- Propane [air, unspecified]: 1.10271e-10 kg
- Propene [air, unspecified]: 9.07052e-8 kg
- Propionic acid [air, unspecified]: 9.96089e-12 kg
- Propylene oxide [air, urban air close to ground]: 4.13374e-10 kg
- Selenium IV [air, non-urban air or from high stacks]: 2.7913e-9 kg
- Selenium IV [air, unspecified]: 3.69237e-12 kg
- Sodium [air, unspecified]: 2.30773e-10 kg
- Sulfur dioxide [air, non-urban air or from high stacks]: 1.40917e-5 kg
- Sulfur dioxide [air, unspecified]: 1.58239e-7 kg
- Sulfur hexafluoride [air, unspecified]: 4.94136e-12 kg
- Tin ion [air, non-urban air or from high stacks]: 3.57266e-9 kg
- Toluene [air, unspecified]: 1.10975e-10 kg
- Toluene [air, urban air close to ground]: 1.94422e-10 kg
- Trichloroethylene [air, unspecified]: 1.85418e-9 kg
- VOC, volatile organic compounds [air, unspecified]: 1.04431e-8 kg
- Vanadium V [air, non-urban air or from high stacks]: 2.09348e-10 kg
- Vanadium V [air, unspecified]: 3.07697e-10 kg
- Water [air, low population density, long-term]: 0.000125636 m3
- Water [air, non-urban air or from high stacks]: 1.54364e-6 m3
- Water [air, unspecified]: 0.0190592 m3
- Water [air, urban air close to ground]: 0.00117966 m3
- Xylene [air, urban air close to ground]: 1.94422e-10 kg
- Zinc II [air, non-urban air or from high stacks]: 2.15105e-8 kg
- Zinc II [air, unspecified]: 1.38967e-11 kg
- Oils, unspecified [soil, unspecified]: 5.53028e-6 kg
- AOX, Adsorbable Organic Halogen [water, ground-]: 3.75587e-6 kg
- AOX, Adsorbable Organic Halogen [water, surface water]: 8.32549e-8 kg
- AOX, Adsorbable Organic Halogen [water, unspecified]: 9.67415e-8 kg
- Aluminium III [water, surface water]: 3.36676e-5 kg
- Aluminium III [water, unspecified]: 9.21174e-5 kg
- Ammonium [water, ground-]: 1.45663e-6 kg
- Ammonium [water, unspecified]: 8.79512e-8 kg
- Aniline [water, ground-]: 2.18658e-7 kg
- Aniline [water, unspecified]: 3.99639e-9 kg
- Antimony ion [water, ground-]: 5.09112e-9 kg
- Antimony ion [water, unspecified]: 2.03633e-11 kg
- Arsenic ion [water, ground-]: 3.829e-6 kg
- Arsenic ion [water, surface water]: 6.77744e-9 kg
- Arsenic ion [water, unspecified]: 1.71612e-8 kg
- BOD5, Biological Oxygen Demand [water, ground-]: 5.56755e-5 kg
- BOD5, Biological Oxygen Demand [water, unspecified]: 1.95085e-5 kg
- Benzene, hexachloro- [water, unspecified]: 2.40758e-13 kg
- Benzene, pentachloro- [water, unspecified]: 3.95062e-13 kg
- COD, Chemical Oxygen Demand [water, ground-]: 0.000222299 kg
- COD, Chemical Oxygen Demand [water, unspecified]: 3.40801e-5 kg
- Cadmium II [water, ground-]: 6.40187e-7 kg
- Cadmium II [water, surface water]: 4.73792e-11 kg
- Cadmium II [water, unspecified]: 4.60582e-8 kg
- Calcium II [water, surface water]: 5.62763e-7 kg
- Chloride [water, surface water]: 0.00118617 kg
- Chloride [water, unspecified]: 0.000431344 kg
- Chlorine [water, ground-]: 4.51262e-7 kg
- Chlorine [water, unspecified]: 1.94138e-8 kg
- Chloroethylene [water, unspecified]: 1.15559e-10 kg
- Chloroform [water, unspecified]: 3.09782e-11 kg
- Chromium III [water, ground-]: 7.39926e-7 kg
- Chromium III [water, surface water]: 7.55255e-12 kg
- Chromium III [water, unspecified]: 4.01948e-8 kg
- Chromium VI [water, ground-]: 7.40926e-8 kg
- Chromium VI [water, unspecified]: 3.73472e-9 kg
- Copper ion [water, ground-]: 1.05763e-6 kg
- Copper ion [water, surface water]: 1.0512e-9 kg
- Copper ion [water, unspecified]: 9.77727e-7 kg
- Cyanide [water, ground-]: 1.36415e-7 kg
- Cyanide [water, surface water]: 4.04683e-11 kg
- Cyanide [water, unspecified]: 3.48638e-9 kg
- DOC, Dissolved Organic Carbon [water, unspecified]: 2.31484e-5 kg
- Dioxins, measured as 2,3,7,8-tetrachlorodibenzo-p-dioxin [water, unspecified]: 8.60837e-17 kg
- Dissolved solids [water, ground-]: 0.00080555 kg
- Dissolved solids [water, unspecified]: 1.4338e-5 kg
- Ethane, 1,2-dichloro- [water, unspecified]: 2.58159e-10 kg
- Fluoride [water, ground-]: 6.4249e-7 kg
- Fluoride [water, unspecified]: 8.79791e-9 kg
- Iron ion [water, ground-]: 8.34299e-7 kg
- Iron ion [water, surface water]: 1.15756e-8 kg
- Iron ion [water, unspecified]: 1.60128e-6 kg
- Lead II [water, ground-]: 3.20936e-8 kg
- Lead II [water, surface water]: 3.51714e-9 kg
- Lead II [water, unspecified]: 1.22995e-6 kg
- Magnesium [water, surface water]: 4.91527e-5 kg
- Manganese II [water, ground-]: 6.60998e-7 kg
- Manganese II [water, surface water]: 1.16486e-7 kg
- Manganese II [water, unspecified]: 7.89535e-6 kg
- Mercury II [water, ground-]: 7.80162e-9 kg
- Mercury II [water, surface water]: 3.05414e-10 kg
- Mercury II [water, unspecified]: 1.74232e-10 kg
- Methane, tetrachloro-, R-10 [water, unspecified]: 1.89811e-11 kg
- Nickel II [water, ground-]: 9.70035e-7 kg
- Nickel II [water, surface water]: 3.14398e-12 kg
- Nickel II [water, unspecified]: 1.34407e-5 kg
- Nitrate [water, ground-]: 4.07757e-7 kg
- Nitrate [water, surface water]: 8.58357e-7 kg
- Nitrate [water, unspecified]: 1.76403e-7 kg
- Nitrogen [water, ground-]: 3.66134e-5 kg
- Nitrogen [water, unspecified]: 1.98727e-6 kg
- Nitrogen, organic bound [water, unspecified]: 2.33329e-8 kg
- Oils, unspecified [water, ground-]: 7.57316e-6 kg
- Oils, unspecified [water, unspecified]: 1.10168e-6 kg
- Phenol [water, ground-]: 3.64777e-7 kg
- Phenol [water, unspecified]: 1.74152e-8 kg
- Phosphate [water, surface water]: 1.32012e-6 kg
- Phosphorus [water, ground-]: 3.31228e-6 kg
- Phosphorus [water, unspecified]: 2.13311e-7 kg
- Potassium I [water, surface water]: 5.4019e-7 kg
- Selenium IV [water, ground-]: 1.40572e-7 kg
- Selenium IV [water, unspecified]: 8.70761e-10 kg
- Silicon [water, surface water]: 3.74965e-7 kg
- Sodium I [water, surface water]: 0.00101341 kg
- Sodium I [water, unspecified]: 0.00266338 kg
- Sulfate [water, surface water]: 6.01484e-5 kg
- Sulfate [water, unspecified]: 0.0069406 kg
- Sulfide [water, ground-]: 9.03151e-7 kg
- Sulfide [water, unspecified]: 3.88242e-8 kg
- Suspended solids, unspecified [water, ground-]: 6.6968e-5 kg
- Suspended solids, unspecified [water, surface water]: 2.29748e-6 kg
- Suspended solids, unspecified [water, unspecified]: 5.12149e-6 kg
- TOC, Total Organic Carbon [water, ground-]: 1.37478e-5 kg
- TOC, Total Organic Carbon [water, unspecified]: 9.40057e-6 kg
- Tin ion [water, surface water]: 4.30073e-12 kg
- Tin ion [water, unspecified]: 7.67626e-6 kg
- Vanadium V [water, ground-]: 1.33135e-7 kg
- Vanadium V [water, unspecified]: 3.48638e-9 kg
- Water [water, unspecified]: 1.44803e-5 m3
- Zinc II [water, ground-]: 1.70638e-6 kg
- Zinc II [water, surface water]: 1.52581e-8 kg
- Zinc II [water, unspecified]: 2.85498e-6 kg
