# treatment of sewage sludge, 97% water, WWT, WW from glass production, landfarming

Dataset: EcoSpold 2, unit process
Geography: CH
Time period: 2000-01-01 to 2022-12-31
Technology level: current
Classification: ISIC rev.4 ecoinvent: 3821:Treatment and disposal of non-hazardous waste
Scenario: Business-as-Usual
System model: Allocation at the point of substitution
Generated by: Nikolia Stoikou
Database: ecoinvent
isCopyrightProtected: true

## General comment
The process represents the treatment of a waste (sewage sludge) that is exclusively produced from another waste treatment. Recommended use of this dataset: to be used within the specific chain of treatments for 'wastewater from glass production'. Share of biogenic carbon in the sludge: 0%.

## Included activities start
The activity starts with the waste being available for landfarming. Collection and transportation of the waste to this process is not included.

## Included activities end
The activity ends with the waste being treated and waste-specific emissions from the landfarming process are released to the environment (air, water and soil). The activity is considering local fate of emissions and the initial specific wastewater composition (generating the sewage sludge). Further, it includes provision of fertiliser functions for N, P, K, if present in the sludge.

## Geography
The site has mean annual temperature (MAT) of 9.5 degC, mean annual precipitation (MAP) of 1483.00559816076 mm/year, mean annual actual evaporation (EAT) of 528.63778611689 mm/year. Climate will influence the local fate emissions based on the elemental composition of the sludge as well as water evaporation to air (= consumptive water use).
References: UN data, 2020. Precipitation, Environment Statistics Database, United Nations Statistics Division Available at: http://data.un.org/Data.aspx?q=precipitation&d=ENV&f=variableID%3a6;
World Bank, 2022. Surface area (sq.km), World Bank Group Available at: https://data.worldbank.org/indicator/AG.SRF.TOTL.K2;
MeteoSwiss, 2022. Data on Swiss temperature mean, Federal Department of Home Affairs FDHA. Federal Office of Meteorology and Climatology. Swiss Climate Available at: https://www.MeteoSwiss.admin.ch/home/climate/swiss-climate-in-detail/Swiss-temperature-mean/Data-on-the-Swiss-temperature-mean.html?query=TEMPERATURE+DATA&topic=/content/MeteoSwiss/tags/topics/klima&pageIndex=0&tab=search_tab;
Doka G.,2021. A model for composition-specific life cycle inventories of regionalised wastewater fates, Zurich, Switzerland. http://www.doka.ch/publications.htm

## Technology
Landfarming is the process of spreading a substrate on agricultural soil. Sewage sludge is generated in the wastewater treatment of wastewater from glass production. Spreading of liquid sewage sludge (97w% water content) on agricultural fields with mobile vacuum tanker.

## Reference product
- organic nitrogen fertiliser, as N: 1 kg; By-product classification allocatable product; CPC 34659: Fertilizers n.e.c.; lognormal variance with pedigree 0.1047, pedigree (1,1,1,1,1)
  gross fertilizer function provided from sewage sludge spreading on agricultural fields.
  Uncertainty: Uncertainty calculated from upstream wastewater technosphere fate uncertainty, wastewater composition uncertainty, and treatment model uncertainty
  production volume 133.31 kg
    Calculated in proportion to wastewater reference product.
  property nitrogen content 1
    Nitrogen content (on a dry matter basis) of organic nitrogen fertiliser, as N is calculated from the molecular formula of the substance (Nitrogen).
  property price 0.473 EUR2005
    Set equal to the price of the corresponding inorganic fertiliser
  properties: carbon allocation 0 kg, carbon content 0, carbon content, fossil 0, carbon content, non-fossil 0, dry mass 1 kg, water content 0, water in wet mass 0 kg, wet mass 1 kg

## Inputs from technosphere
- EUR-flat pallet: 1.19419e-6, 5.42815e-7 unit (2 suppliers, which the file names only by identifier); sum of these 1.73701e-6 unit
- acetone, liquid: 2.33145e-8 kg
- aluminium alloy, AlMg3: 2.33052e-5 kg
- aluminium, cast alloy: 0.000810203 kg
- ammonia, anhydrous, liquid: 3.16318e-8, 3.31535e-9, 3.2286e-8, 1.21845e-7, 1.62949e-8, 1.48208e-8, 3.50618e-7, 1.0474e-8 kg (8 suppliers, which the file names only by identifier); sum of these 5.81286e-7 kg
- argon, liquid: 1.42586e-8 kg
- brazing solder, cadmium free: 4.26727e-6 kg
- cadmium sulfide, semiconductor-grade: 6.74504e-8 kg
- cadmium telluride, semiconductor-grade: 1.45534e-6 kg
- chemical, inorganic: 4.85567e-5 kg
- copper, cathode: 0.00010894 kg
- diesel: 3.90661e-6 kg
- dolomite: 9.81129e-5, 5.19716e-5 kg (2 suppliers, which the file names only by identifier); sum of these 0.000150084 kg
- electricity, medium voltage: 4.74956e-7, 1.33674e-6, 0.000620793, 1.27782e-7, 3.55971e-8, 4.34315e-7, 0.0010688, 6.03066e-8, 1.85831e-7, 2.29589e-6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 kWh (73 suppliers, which the file names only by identifier); sum of these 0.0853383 kWh
- ethylvinylacetate, foil: 1.72022e-6 kg
- extrusion, plastic film: 9.7468e-6 kg
- feldspar: 6.31238e-5 kg
- fish curing plant: 5.11788e-11, 5.02826e-10 unit (2 suppliers, which the file names only by identifier); sum of these 5.54005e-10 unit
- gallium, semiconductor-grade: 2.17588e-8 kg
- glass fibre reinforced plastic, polyamide, injection moulded: 5.82475e-5 kg
- graphite: 2.75891e-9 kg
- heat, district or industrial, natural gas: 0.00991534, 0.00100921 MJ (2 suppliers, which the file names only by identifier); sum of these 0.0109245 MJ
- heat, district or industrial, other than natural gas: 0.00911201 MJ
- heavy fuel oil: 7.14302e-5, 6.01054e-7, 3.05564e-6, 3.96211e-6, 7.71063e-7, 1.03218e-6, 1.47162e-5 kg (7 suppliers, which the file names only by identifier); sum of these 9.55685e-5 kg
- hydrogen, liquid: 6.38106e-6, 2.92013e-5 kg (2 suppliers, which the file names only by identifier); sum of these 3.55823e-5 kg
- indium: 1.46622e-6 kg
- light fuel oil: 6.67061e-5, 6.62111e-6, 6.36629e-7, 1.43215e-5, 4.73121e-7, 4.39369e-7, 3.28064e-6 kg (7 suppliers, which the file names only by identifier); sum of these 9.24785e-5 kg
- lime: 2.7351e-5, 0.000316678 kg (2 suppliers, which the file names only by identifier); sum of these 0.000344029 kg
- lubricating oil: 4.33894e-8, 9.14014e-9 kg (2 suppliers, which the file names only by identifier); sum of these 5.25296e-8 kg
- metal working, average for chromium steel product manufacturing: 0.000298293 kg
- molybdenum: 2.17588e-8 kg
- municipal solid waste: -7.94601e-8, -4.66818e-6, -2.86126e-8, -5.61974e-5, -2.0022e-8 kg (5 suppliers, which the file names only by identifier); sum of these -6.09936e-5 kg
- natural gas, high pressure: 0.000232895 m3
- nitrogen, liquid: 7.79182e-6, 5.55709e-7 kg (2 suppliers, which the file names only by identifier); sum of these 8.34753e-6 kg
- oxygen, liquid: 1.70146e-7, 6.20091e-7 kg (2 suppliers, which the file names only by identifier); sum of these 7.90237e-7 kg
- packaging film, low density polyethylene: 0.000548629 kg
- packaging glass factory: 2.75891e-13 unit
- packaging glass, white: 0.00213211 kg
- phosphoric acid, fertiliser grade, without water, in 70% solution state: 3.78444e-9, 1.18342e-7 kg (2 suppliers, which the file names only by identifier); sum of these 1.22126e-7 kg
- photovoltaic panel factory: 6.52185e-9 unit
- polyethylene terephthalate, granulate, amorphous: 0.000288241 kg
- polyethylene, high density, granulate: 0.00182759 kg
- polyethylene, low density, granulate: 3.00211e-5 kg
- polyvinylfluoride, film: 0.000200401 kg
- refractory, fireclay, packed: 3.15619e-5 kg
- scrap aluminium: -0.000233261, -1.09441e-5, -0.000565998 kg (3 suppliers, which the file names only by identifier); sum of these -0.000810203 kg
- scrap tin sheet: -6.28565e-5, -0.00459051 kg (2 suppliers, which the file names only by identifier); sum of these -0.00465337 kg
- selenium: 4.38301e-8 kg
- sheet rolling, aluminium: 0.000810203 kg
- silica sand: 0.00150778 kg
- silicon tetrahydride: 5.82622e-6 kg
- soda ash, light: 0.000490551 kg
- sodium chloride, powder: 0.0194936 kg
- soft solder, Sn97Cu3: 1.05798e-5, 5.22493e-6 kg (2 suppliers, which the file names only by identifier); sum of these 1.58047e-5 kg
- solar glass, low-iron: 2.97747e-5 kg
- solid bleached and unbleached board carton: 3.98037e-5, 2.79379e-6 kg (2 suppliers, which the file names only by identifier); sum of these 4.25975e-5 kg
- steel, low-alloyed, hot rolled: 0.00156916 kg
- synthetic rubber: 0.000110043 kg
- tap water: 9.8873e-9, 0.0648258, 4.1204e-7, 1.63404e-8, 7.34828e-9, 3.04903e-8, 4.71518e-6, 1.07191e-8, 8.21388e-8 kg (9 suppliers, which the file names only by identifier); sum of these 0.0648311 kg
- tempering, flat glass: 2.97747e-5 kg
- thermoforming of plastic sheets: 0.000288241 kg
- tin: 2.17588e-8 kg
- tin plated chromium steel sheet, 2 mm: 0.000298293 m2
- urea: 2.6892e-7, 3.40108e-8, 2.29639e-7 kg (3 suppliers, which the file names only by identifier); sum of these 5.3257e-7 kg
- vegetable oil, refined: 0.00741163 kg
- waste packaging glass, unsorted: -0.00213211 kg
- waste plastic, mixture: -6.27123e-5, -1.24235e-8, -2.48702e-9, -3.16898e-7, -3.33317e-10, -1.21788e-9, -2.22739e-9, -1.35397e-9, -1.5486e-9, -9.1613e-10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 kg (43 suppliers, which the file names only by identifier); sum of these -0.000564637 kg
- waste polyethylene, for recycling, unsorted: -6.7615e-5, -9.51431e-5, -6.7615e-5, -6.7615e-5 kg (4 suppliers, which the file names only by identifier); sum of these -0.000297988 kg
- waste polyvinylfluoride: -2.98251e-6, -0.000197418 kg (2 suppliers, which the file names only by identifier); sum of these -0.000200401 kg
- waste rubber, unspecified: -2.26231e-6, -5.38904e-5, -5.38904e-5 kg (3 suppliers, which the file names only by identifier); sum of these -0.000110043 kg
- waste, from silicon wafer production, inorganic: -6.81916e-8 kg
- wastewater from glass production: -6.81652e-5, -3.29639e-7 m3 (2 suppliers, which the file names only by identifier); sum of these -6.84949e-5 m3
- wastewater from vegetable oil refinery: -8.09634e-5 m3
- water, completely softened: 0.0216134, 0.0300704, 0.0495205 kg (3 suppliers, which the file names only by identifier); sum of these 0.101204 kg
- wire drawing, copper: 0.000108851 kg
- zinc: 2.39327e-8 kg

## Inputs from nature
- Water, unspecified natural origin [natural resource, in water]: 4.37011e-6 m3

## Emissions to nature
- Ammonia [air, urban air close to ground]: 5.78267e-11 kg
- Antimony ion [air, urban air close to ground]: 1.4876e-10 kg
- Arsenic ion [air, urban air close to ground]: 1.4876e-10 kg
- Benzene [air, urban air close to ground]: 3.79071e-9 kg
- Benzo(a)pyrene [air, urban air close to ground]: 3.27139e-13 kg
- Cadmium II [air, urban air close to ground]: 1.48802e-10 kg
- Carbon dioxide, fossil [air, urban air close to ground]: 0.00152063 kg
- Carbon monoxide, fossil [air, urban air close to ground]: 7.51215e-8 kg
- Chromium III [air, urban air close to ground]: 1.4876e-10 kg
- Cobalt II [air, urban air close to ground]: 1.4876e-10 kg
- Copper ion [air, urban air close to ground]: 1.4876e-10 kg
- Dinitrogen monoxide [air, urban air close to ground]: 6.4222e-9 kg
- Dioxins, measured as 2,3,7,8-tetrachlorodibenzo-p-dioxin [air, urban air close to ground]: 3.97468e-18 kg
- Formaldehyde [air, urban air close to ground]: 4.61048e-9 kg
- Hydrocarbons, aliphatic, alkanes, unspecified [air, urban air close to ground]: 2.62648e-8 kg
- Hydrochloric acid [air, urban air close to ground]: 1.09694e-7 kg
- Hydrogen fluoride [air, urban air close to ground]: 3.97282e-8 kg
- Lead II [air, urban air close to ground]: 1.7039e-9 kg
- Manganese II [air, urban air close to ground]: 1.4876e-10 kg
- Methane, fossil [air, urban air close to ground]: 3.86426e-8 kg
- NMVOC, non-methane volatile organic compounds [air, urban air close to ground]: 9.75549e-9 kg
- Nickel II [air, urban air close to ground]: 1.4876e-10 kg
- Nitrogen oxides [air, urban air close to ground]: 4.63496e-6 kg
- Particulate Matter, < 2.5 um [air, urban air close to ground]: 5.56195e-7 kg
- Particulate Matter, > 10 um [air, urban air close to ground]: 3.5314e-8 kg
- Particulate Matter, > 2.5 um and < 10um [air, urban air close to ground]: 2.86926e-8 kg
- Selenium IV [air, urban air close to ground]: 1.61782e-8 kg
- Sulfur dioxide [air, urban air close to ground]: 7.59251e-6 kg
- Water [air, unspecified]: 6.88676e-7 m3
- AOX, Adsorbable Organic Halogen [water, surface water]: 2.20712e-10 kg
- BOD5, Biological Oxygen Demand [water, surface water]: 2.20712e-8 kg
- COD, Chemical Oxygen Demand [water, surface water]: 2.20712e-8 kg
- Copper ion [water, surface water]: 2.20712e-12 kg
- DOC, Dissolved Organic Carbon [water, surface water]: 2.20712e-8 kg
- Nitrite [water, surface water]: 2.20712e-10 kg
- Nitrogen [water, unspecified]: 0.000160924 kg
- Oils, unspecified [water, surface water]: 2.20712e-9 kg
- Phosphorus [water, unspecified]: 3.34031e-5 kg
- Sulfate [water, surface water]: 2.20712e-9 kg
- Suspended solids, unspecified [water, surface water]: 2.20712e-9 kg
- TOC, Total Organic Carbon [water, surface water]: 2.20712e-8 kg
- Water [water, unspecified]: 1.76723e-8 m3
- Zinc II [water, surface water]: 2.20712e-11 kg
