# treatment of water discharge from petroleum/natural gas extraction, onshore

Dataset: EcoSpold 2, unit process
Geography: GLO
Time period: 1980-01-01 to 2022-12-31
Technology level: current
Classification: ISIC rev.4 ecoinvent: 0620:Extraction of natural gas
Scenario: Business-as-Usual
System model: Allocation at the point of substitution
Generated by: Christoph Meili
Published in: Meili, C. 2022
Database: ecoinvent
isCopyrightProtected: true

## General comment
This activity represents the emissions related to the discharge of water, in kg, produced during extraction of crude petroleum oil and natural gas in onshore operations.
According to Meili et al. (2022), the produced water may originate as natural water in the formations holding oil and gas or can be water that was previously injected into those formations through activities designed to increase oil production from the formations such as water flooding or steam flooding operations. In some situations, additional water from other formations adjacent to the hydrocarbon-bearing layers may become part of the produced water that comes to the surface.
The physical and chemical properties of produced water vary considerably depending on the geographic location of the field, the geologic formation from which the water was produced, and the type of hydrocarbon product being produced. Because data on oil emissions is available for different production areas, this value is not used directly at discharge of produced water but is assessed in the inventory of crude oil production directly (as described in section 10.3 of Meili et al. 2022).
The water balance for type of freshwater input and reinjection and discharge of (treated) produced water is modelled in the central production dataset at the country-level, to enable regionalized assessment of water impacts (see Meili et al. 2022, chapter 12).
Reference(s):
C. Meili, N. Jungbluth, M. Bussa (2022) Life cycle inventories of crude oil and natural gas extraction. ESU-services Ltd. Schaffhausen, Switzerland. Available from: http://esu-ser-vices.ch/data/public-lci-reports/

## Included activities start
This activity starts after the (pre-)treatment of water produced in oil and gas extraction, at the point of discharge to the environment.

## Included activities end
Emissions of water pollutants without water content discharged to rivers after treatment. Oil emissions are not included and are considered separately. Water in- and output have to be considered separately.

## Geography
Global

## Technology
Discharge after pre-treatment.

## Time period
Time of publications. Most figures could be verified for 2011.

## Reference product
- water discharge from petroleum/natural gas extraction, onshore: -1 kg; By-product classification Waste; CPC 39920: Sewage sludge
  production volume 2.8434e12 kg
    About 1m3 of water is discharged per tonne of crude oil produced. Calculated from a global output of 4.06E+12 kg crude petroleum (BP 2022), assuming 30:70 offshore vs. onshore production, and 1kg water discharge/kg crude.
  property price 0 EUR2005
    Waste products are assigned a price of zero as they are assumed to require further treatment.
  properties: carbon allocation 0 kg, carbon content 0

## Emissions to nature
- Acenaphthene [water, surface water]: 2.361e-9 kg; lognormal variance with pedigree 0.425037, pedigree (2,3,3,3,5)
  Literature, specific PAH
- Acenaphthylene [water, surface water]: 1.1694e-9 kg; lognormal variance with pedigree 0.424537, pedigree (2,2,3,3,5)
  Literature, specific PAH
- Ammonium [water, surface water]: 0.0001615 kg; lognormal variance with pedigree 0.1639, pedigree (2,2,3,3,5)
  Literature
- Arsenic ion [water, surface water]: 2.7775e-8 kg; lognormal variance with pedigree 0.770373, pedigree (2,2,3,3,5)
  Literature
- BOD5, Biological Oxygen Demand [water, surface water]: 0.00052475 kg; lognormal variance with pedigree 0.1713, pedigree (4,2,3,3,5)
  Threshold limit for IN
- Barium II [water, surface water]: 0.00012908 kg; lognormal variance with pedigree 0.770373, pedigree (2,2,3,3,5)
  Literature
- Benzene [water, surface water]: 3.721e-6 kg; lognormal variance with pedigree 0.424537, pedigree (2,2,3,3,5)
  Literature
- Benzene, ethyl- [water, surface water]: 1.342e-6 kg; lognormal variance with pedigree 0.425937, pedigree (3,2,3,3,5)
  Literature
- Boron [water, surface water]: 1.2e-5 kg; lognormal variance with pedigree 0.770373, pedigree (2,2,3,3,5)
  Literature
- Bromine [water, surface water]: 3.5e-5 kg; lognormal variance with pedigree 0.810273, pedigree (3,3,5,3,5)
  Literature
- COD, Chemical Oxygen Demand [water, surface water]: 3.5e-5 kg; lognormal variance with pedigree 0.2098, pedigree (4,3,5,3,5)
  Threshold limit for IN
- Cadmium II [water, surface water]: 3.505e-9 kg; lognormal variance with pedigree 0.424537, pedigree (2,2,3,3,5)
  Literature
- Caesium [water, surface water]: 5e-8 kg; lognormal variance with pedigree 0.464437, pedigree (3,3,5,3,5)
  Literature
- Calcium II [water, surface water]: 0.0085825 kg; lognormal variance with pedigree 0.425937, pedigree (3,2,3,3,5)
  Literature
- Carbonate [water, surface water]: 0.00027925 kg; lognormal variance with pedigree 0.424537, pedigree (2,2,3,3,5)
  Literature
- Carboxylic acids, unspecified [water, surface water]: 0.000184 kg; lognormal variance with pedigree 0.2024, pedigree (2,3,5,3,5)
  Environmental report for NO
- Chloride [water, surface water]: 0.071775 kg; lognormal variance with pedigree 0.425937, pedigree (3,2,3,3,5)
  Literature
- Chromium III [water, surface water]: 1.085e-8 kg; lognormal variance with pedigree 0.424537, pedigree (2,2,3,3,5)
  Literature
- Copper ion [water, surface water]: 3.93e-8 kg; lognormal variance with pedigree 0.424537, pedigree (2,2,3,3,5)
  Literature
- DOC, Dissolved Organic Carbon [water, surface water]: 0.000295 kg; lognormal variance with pedigree 0.2038, pedigree (3,3,5,3,5)
  Literature
- Fluoride [water, surface water]: 5e-7 kg; lognormal variance with pedigree 0.2038, pedigree (3,3,5,3,5)
  Literature
- Hydrocarbons, aliphatic, alkanes, unspecified [water, surface water]: 6.5e-6 kg; lognormal variance with pedigree 0.464437, pedigree (3,3,5,3,5)
  Literature
- Hydrocarbons, aliphatic, unsaturated [water, surface water]: 6e-7 kg; lognormal variance with pedigree 0.464437, pedigree (3,3,5,3,5)
  Literature
- Hydrocarbons, aromatic [water, surface water]: 2.6e-5 kg; lognormal variance with pedigree 0.2038, pedigree (3,3,5,3,5)
  Literature
- Iodide [water, surface water]: 5.825e-5 kg; lognormal variance with pedigree 0.771773, pedigree (3,2,3,3,5)
  Literature
- Iron ion [water, surface water]: 1.1877e-5 kg; lognormal variance with pedigree 0.770373, pedigree (2,2,3,3,5)
  Literature
- Lead II [water, surface water]: 1.1273e-8 kg; lognormal variance with pedigree 0.770373, pedigree (2,2,3,3,5)
  Literature
- Lead-210 [water, surface water]: 0.047465 kBq; lognormal variance with pedigree 0.424537, pedigree (2,2,3,3,5)
  Literature
- Lithium I [water, surface water]: 1.325e-5 kg; lognormal variance with pedigree 0.770373, pedigree (2,2,3,3,5)
  Literature
- Magnesium [water, surface water]: 0.0014575 kg; lognormal variance with pedigree 0.771773, pedigree (3,2,3,3,5)
  Literature
- Manganese II [water, surface water]: 3.7702e-6 kg; lognormal variance with pedigree 0.771773, pedigree (3,2,3,3,5)
  Literature
- Mercury II [water, surface water]: 2.5035e-9 kg; lognormal variance with pedigree 0.770373, pedigree (2,2,3,3,5)
  Literature
- Molybdenum VI [water, surface water]: 6.25e-10 kg; lognormal variance with pedigree 0.770373, pedigree (2,2,3,3,5)
  Literature
- Nickel II [water, surface water]: 1.0852e-7 kg; lognormal variance with pedigree 0.770373, pedigree (2,2,3,3,5)
  Literature
- PAH, polycyclic aromatic hydrocarbons [water, surface water]: 1.0905e-6 kg; lognormal variance with pedigree 0.424537, pedigree (2,2,3,3,5)
  Literature
- Phenol [water, surface water]: 4e-6 kg; lognormal variance with pedigree 0.463037, pedigree (2,3,5,3,5)
  Environmental report for NO
- Polonium-210 [water, surface water]: 1.6188e-6 kBq; lognormal variance with pedigree 0.424537, pedigree (2,2,3,3,5)
  Literature
- Potassium I [water, surface water]: 0.0010075 kg; lognormal variance with pedigree 0.771773, pedigree (3,2,3,3,5)
  Literature
- Radium-224 [water, surface water]: 0.012615 kBq; lognormal variance with pedigree 0.425937, pedigree (3,2,3,3,5)
  Literature
- Radium-226 [water, surface water]: 0.3037 kBq; lognormal variance with pedigree 0.424537, pedigree (2,2,3,3,5)
  Literature
- Radium-228 [water, surface water]: 0.05003 kBq; lognormal variance with pedigree 0.425937, pedigree (3,2,3,3,5)
  Literature
- Rubidium [water, surface water]: 5e-7 kg; lognormal variance with pedigree 0.810273, pedigree (3,3,5,3,5)
  Literature
- Silver I [water, surface water]: 3e-8 kg; lognormal variance with pedigree 0.810273, pedigree (3,3,5,3,5)
  Literature
- Sodium I [water, surface water]: 0.035075 kg; lognormal variance with pedigree 0.771773, pedigree (3,2,3,3,5)
  Literature
- Strontium [water, surface water]: 0.00034175 kg; lognormal variance with pedigree 0.771773, pedigree (3,2,3,3,5)
  Literature
- Sulfate [water, surface water]: 0.000345 kg; lognormal variance with pedigree 0.1639, pedigree (2,2,3,3,5)
  Literature
- Suspended solids, unspecified [water, surface water]: 4.5e-5 kg; lognormal variance with pedigree 0.2098, pedigree (4,3,5,3,5)
  Threshold limit for IN
- TOC, Total Organic Carbon [water, surface water]: 0.003045 kg; lognormal variance with pedigree 0.1653, pedigree (3,2,3,3,5)
  Literature
- Thorium-228 [water, surface water]: 0.01 kBq; lognormal variance with pedigree 0.464437, pedigree (3,3,5,3,5)
  Literature
- Thorium-232 [water, surface water]: 3.2375e-7 kBq; lognormal variance with pedigree 0.424537, pedigree (2,2,3,3,5)
  Literature
- Toluene [water, surface water]: 5.8472e-6 kg; lognormal variance with pedigree 0.425937, pedigree (3,2,3,3,5)
  Literature
- Uranium-238 [water, surface water]: 2.5049e-5 kBq; lognormal variance with pedigree 0.424537, pedigree (2,2,3,3,5)
  Literature
- VOC, volatile organic compounds [water, surface water]: 1.75e-5 kg; lognormal variance with pedigree 0.2038, pedigree (3,3,5,3,5)
  Literature
- Vanadium V [water, surface water]: 3.25e-10 kg; lognormal variance with pedigree 0.770373, pedigree (2,2,3,3,5)
  Literature
- Xylene [water, surface water]: 4.8833e-6 kg; lognormal variance with pedigree 0.425937, pedigree (3,2,3,3,5)
  Literature
- Zinc II [water, surface water]: 1e-5 kg; lognormal variance with pedigree 0.770373, pedigree (2,2,3,3,5)
  Literature

## Sampling procedure
Publication in environmental reports and other literature.

## Extrapolations
Data from offshore production are applied for global onshore production. Specific measurements for onshore production were not available.
Following Meili et al. (2022), the same emission inventory is used for discharge onshore as for offshore, but the subcategory for the water emissions is changed to “to river” instead of “to ocean”. Uncertainties of this estimation are relatively high because different values are expected for different regions and there are only values for a random sample of the various regions.
