# treatment of coating from waste cathode ray tube display, municipal waste incineration

Dataset: EcoSpold 2, unit process
Geography: RoW
Time period: 2006-01-01 to 2022-12-31
Technology level: current
Classification: ISIC rev.4 ecoinvent: 3821:Treatment and disposal of non-hazardous waste
Synonyms: Siedlungsabfallverbrennung; municipal waste incineration; Kehrichtverbrennung
Scenario: Business-as-Usual
System model: Allocation at the point of substitution
Share of production covered: 1.8 %
Generated by: Gabor Doka
Published in: Doka G. 2013
Database: ecoinvent
isCopyrightProtected: true

## General comment
This dataset represents the activity of waste disposal of coating from waste cathode ray tube display in a municipal solid waste incinerator (MSWI) // Recommended use of this dataset: Only for incineration of LCD module of a LCD screen separated during the recycling of used LCD screens // // Waste composition (wet, in ppm): H2O 100000; O 44700; H n.a.; C n.a.; S 225000; N n.a.; P n.a.; B n.a.; Cl n.a.; Br n.a.; F n.a.; I n.a.; Ag 3020; As n.a.; Ba 3100; Cd n.a.; Co n.a.; Cr n.a.; Cu 2570; Hg n.a.; Mn n.a.; Mo n.a.; Ni n.a.; Pb n.a.; Sb n.a.; Se n.a.; Sn n.a.; V n.a.; Zn 368000; Be n.a.; Sc n.a.; Sr 248000; Ti n.a.; Tl n.a.; W n.a.; Si n.a.; Fe n.a.; Ca n.a.; Al 5590; K n.a.; Mg n.a.; Na n.a.; // Share of carbon in waste that is biogenic 60.4%. // Share of metals in waste not oxidised and bulk-recyclable (exclude very small or thin parts) Iron: 0%; Alu: 0%; Copper: 0%. // One kg of this waste produces 1.605 kg of slag and 0 kg of residues, which are landfilled. // Net energy production: 0MJ/kg electric energy and 0MJ/kg thermal energy. // Recovery of metal scrap to recycling: 0g iron scrap, 0g aluminium scrap, 0g copper scrap.

## Included activities start
waste incineration from waste reception gate and delivery into waste bunker at incinerator plant site (without transports to the incinerator)

## Included activities end
Waste-specific short-term emissions to water from leachate. Long-term emissions from landfill to ground water.

## Geography
Specific to the technology mix encountered in Switzerland in 2010. Well applicable to modern incineration practices in Europe, North America or Japan.

## Technology
average Swiss MSWI plants in 2010 (grate incinerators) with electrostatic precipitator for fly ash (ESP), wet flue gas scrubber and 25% SNCR , 42.77% SCR-high dust , 32.68% SCR-low dust -DeNOx facilities and 0% without Denox (weighted according to mass of burnt waste, representing Swiss average). Efficiency of iron scrap separation from slag : 58%. Efficiency of non-ferrous scrap separation from slag : 31%. Gross electric efficiency technology mix 15.84% and Gross thermal efficiency technology mix 28.51%

## Time period
Waste composition as given in literature reference, theoretical data or other source. Transfer coefficients for modern MSWI.

## Reference product
- coating from waste cathode ray tube display: -1 kg; By-product classification Waste; CPC 39: Wastes or scraps
  Main reference product of this activity (supply of disposal service).
  production volume 1.0243e6 kg
    based on estimate on MSW in WTE globally and estimate of share of WEEE residues in Swiss MSW based on unqualified estimate waste CRT screens in CH and rate of this CRT coating waste per CRT device (from Hischier et al. 2007-V)
  property price 0 EUR2005
    Waste products are assigned a price of zero as they are assumed to require further treatment.
  properties: carbon allocation 0 kg, carbon content 0, carbon content, fossil 0, carbon content, non-fossil 0, dry mass 0.9 kg, water content 0.111111, water in wet mass 0.1 kg, wet mass 1 kg

## Inputs from technosphere
- ammonia, anhydrous, liquid: 7.6804e-6, 8.04988e-7, 7.83925e-6, 2.95848e-5, 3.95651e-6, 3.5986e-6, 8.51323e-5, 2.54317e-6 kg (8 suppliers, which the file names only by identifier); sum of these 0.00014114 kg; lognormal variance with pedigree 0.12926, pedigree (1,1,4,1,1)
  Input to DeNOx stage (100% NH3).
  Uncertainty: uncertainty calculated from uncertainty in average DeNOx input, uncertainty in the share of thermal NOx, uncertainty of nitrogen content in average municipal waste and the uncertainty in nitrogen content in *this* waste.
  properties: dry mass 1 kg, wet mass 1 kg
- chromium oxide, flakes: 1.8047e-7 kg; lognormal variance with pedigree 0.45542, pedigree (1,1,4,1,1)
  Input to DeNOx stage.
  Uncertainty: uncertainty calculated from uncertainty in average DeNOx input, uncertainty in the share of thermal NOx, uncertainty of nitrogen content in average municipal waste and the uncertainty in nitrogen content in *this* waste.
  properties: dry mass 1 kg, wet mass 1 kg
- electricity, for reuse in municipal waste incineration only: 2.59407e-5, 0.000586437, 9.84416e-5, 0.00014478, 9.53376e-6, 0.000456734, 1.61852e-5, 0.000655169, 0.000457842, 0.0412746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 kWh (25 suppliers, which the file names only by identifier); sum of these 0.050335 kWh; lognormal variance with pedigree 0.00859512, pedigree (1,1,4,1,1)
  Net electricity required to incinerate this waste (subsidiesed from high-calorific waste fractions).
  Uncertainty: uncertainty is calculated from uncertainties in waste composition and uncertainties in energy efficiency and the uncertainty in internal energy demand
- heat, district or industrial, natural gas: 0.0070341, 0.0190469, 0.00031299 MJ (3 suppliers, which the file names only by identifier); sum of these 0.026394 MJ; lognormal variance with pedigree 0.12926, pedigree (1,1,4,1,1)
  Input to DeNOx stage, to heat up flue gas in low-dust SCR.
  Uncertainty: uncertainty calculated from uncertainty in average DeNOx input, uncertainty in the share of thermal NOx, uncertainty of nitrogen content in average municipal waste and the uncertainty in nitrogen content in *this* waste.
  properties: heating value, net 1 MJ
- heat, for reuse in municipal waste incineration only: 0.00730916, 0.00228384, 0.000461949, 0.000563837, 0.00125288, 0.0254927, 0.00020723, 1.64057e-5, 3.0221e-5, 3.71286e-5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 MJ (25 suppliers, which the file names only by identifier); sum of these 0.19597 MJ; lognormal variance with pedigree 0.00859512, pedigree (1,1,4,1,1)
  Net heat required to incinerate this waste (subsidiesed from high-calorific waste fractions).
  Uncertainty: uncertainty is calculated from uncertainties in waste composition and uncertainties in energy efficiency and the uncertainty in internal energy demand
- municipal waste incineration facility: 2.5e-10 unit
  Demands per kilogram waste.
- process-specific burdens, slag landfill: 1.1507, 0.4539 kg (2 suppliers, which the file names only by identifier); sum of these 1.6046 kg; lognormal variance with pedigree 0.036214, pedigree (1,1,4,1,1)
  Mass-specific expenditures required for landfilling of bottom ash.
  Uncertainty: uncertainty is calculated from uncertainties in waste composition and transfer coefficients in incinerator
- slag landfill: 2.8526e-9 unit; lognormal variance with pedigree 0.036214, pedigree (1,1,4,1,1)
  Landfill infrastructure required for landfilling of bottom ash.
  Uncertainty: uncertainty is calculated from uncertainties in waste composition and transfer coefficients in incinerator
- titanium dioxide: 8.8431e-6 kg; lognormal variance with pedigree 0.45542, pedigree (1,1,4,1,1)
  Input to DeNOx stage (TiO2 catalyst carrier)
  Uncertainty: uncertainty calculated from uncertainty in average DeNOx input, uncertainty in the share of thermal NOx, uncertainty of nitrogen content in average municipal waste and the uncertainty in nitrogen content in *this* waste.
  properties: dry mass 1 kg, wet mass 1 kg
- transport, freight, lorry, unspecified: 0.0556887, 0.00734527, 0.00115 metric ton*km (3 suppliers, which the file names only by identifier); sum of these 0.064184 metric ton*km; lognormal variance with pedigree 0.036214, pedigree (1,1,4,1,1)
  Transport services to transport incineration residues to landfills.
  Uncertainty: uncertainty calculated from uncertainty of the waste composition of this waste, uncertainty of transfer coefficients and the uncertainty in generic transportation distances

## Inputs from nature
- Oxygen [natural resource, in air]: 0.47906 kg; lognormal variance with pedigree 0.2071, pedigree (1,1,4,1,1)
  Oxygen from ambient air needed to combust and oxidise this waste. Net demand, i.e. without O2 leaving the plant in flue gas uncombusted.
  Uncertainty: uncertainty is calculated from uncertainties in waste composition and transfer coefficients to flue gas and soild residues in incinerator

## Emissions to nature
- Ammonia [air, urban air close to ground]: 1.6595e-7 kg; lognormal variance with pedigree 0.17159, pedigree (1,1,4,1,1)
  Nitrogen species emitted to air after DeNOx stage.
  Uncertainty: uncertainty calculated from uncertainty in average N-emissions and uncertainty in the share of thermal NOx and the uncertainty in nitrogen content in *this* waste.
- Benzene [air, urban air close to ground]: 4.4765e-8 kg; lognormal variance with pedigree 0.0491, pedigree (1,1,4,1,1)
  Incomplete combustion product emitted to air.
  Uncertainty: uncertainty calculated from uncertainty in average operation emissions, and the uncertainty of the flue gas volume from this waste.
- Benzene, hexachloro- [air, urban air close to ground]: 9.3601e-11 kg; lognormal variance with pedigree 0.0491, pedigree (1,1,4,1,1)
  (same comment as for Benzene)
- Benzene, pentachloro- [air, urban air close to ground]: 2.3651e-10 kg; lognormal variance with pedigree 0.0491, pedigree (1,1,4,1,1)
  (same comment as for Benzene)
- Benzo(a)pyrene [air, urban air close to ground]: 9.9616e-13 kg; lognormal variance with pedigree 0.30974, pedigree (1,1,4,1,1)
  (same comment as for Benzene)
- Carbon monoxide, fossil [air, urban air close to ground]: 3.0126e-5 kg; lognormal variance with pedigree 0.65557, pedigree (1,1,4,1,1)
  (same comment as for Benzene)
- Carbon monoxide, non-fossil [air, urban air close to ground]: 4.5969e-5 kg; lognormal variance with pedigree 0.65557, pedigree (1,1,4,1,1)
  (same comment as for Benzene)
- Dioxins, measured as 2,3,7,8-tetrachlorodibenzo-p-dioxin [air, urban air close to ground]: 8.9524e-14 kg; lognormal variance with pedigree 0.30974, pedigree (1,1,4,1,1)
  (same comment as for Benzene)
- Heat, waste [air, urban air close to ground]: 0.14554 MJ; lognormal variance with pedigree 0.00898726, pedigree (1,1,4,1,1)
  Waste heat generated from heating value of this waste plus any electricity required to process it.
  Uncertainty: uncertainty is calculated from uncertainties in waste composition and uncertainties in energy efficiency and the uncertainty in internal energy demand
- Methane, fossil [air, urban air close to ground]: 2.6584e-7 kg; lognormal variance with pedigree 0.0491, pedigree (1,1,4,1,1)
  (same comment as for Benzene)
- Methane, non-fossil [air, urban air close to ground]: 4.0564e-7 kg; lognormal variance with pedigree 0.0491, pedigree (1,1,4,1,1)
  (same comment as for Benzene)
- NMVOC, non-methane volatile organic compounds [air, urban air close to ground]: 2.0372e-6 kg; lognormal variance with pedigree 0.0491, pedigree (1,1,4,1,1)
  (same comment as for Benzene)
- Nitrogen oxides [air, urban air close to ground]: 5.2551e-5 kg; lognormal variance with pedigree 0.17159, pedigree (1,1,4,1,1)
  Sum of fuel-Nox and thermal-NOx emitted to air after DeNOx stage.
  Uncertainty: uncertainty calculated from uncertainty in average N-emissions and uncertainty in the share of thermal NOx and the uncertainty in nitrogen content in *this* waste.
- Particulate Matter, < 2.5 um [air, urban air close to ground]: 5.3446e-6 kg; lognormal variance with pedigree 0.30974, pedigree (1,1,4,1,1)
  (same comment as for Benzene)
- Particulate Matter, > 2.5 um and < 10um [air, urban air close to ground]: 2.6857e-8 kg; lognormal variance with pedigree 0.12811, pedigree (1,1,4,1,1)
  (same comment as for Benzene)
- Phenol, pentachloro- [air, urban air close to ground]: 1.9494e-11 kg; lognormal variance with pedigree 0.0491, pedigree (1,1,4,1,1)
  (same comment as for Benzene)
- Toluene [air, urban air close to ground]: 8.953e-8 kg; lognormal variance with pedigree 0.0491, pedigree (1,1,4,1,1)
  (same comment as for Benzene)
- Water [air, urban air close to ground]: 0.00073583 m3; lognormal variance with pedigree 0.12113, pedigree (1,1,4,1,1)
  Water vapour from waste humidity, hydrogen oxidation and part of the process water.
  Uncertainty: Uncertainty calculated from uncertainty in waste composition, process water input and the uncertainty of fraction to air.
- Aluminium III [water, ground-, long-term]: 0.0045663 kg; lognormal variance with pedigree 0.45641, pedigree (1,1,4,1,1)
  Long-term emissions from landfilling of incineration residues.
  Uncertainty: uncertainty is calculated from uncertainties in waste composition and transfer coefficients in incinerator and landfills.
- Aluminium III [water, surface water]: 7.3447e-8 kg; lognormal variance with pedigree 1.6701, pedigree (1,1,4,1,1)
  Emissions to water from waste composition and transfer coefficients in incinerator and landfills.
  Uncertainty: uncertainty is calculated from uncertainties in waste composition and transfer coefficients in incinerator and landfills
- Barium II [water, ground-, long-term]: 0.0030995 kg; lognormal variance with pedigree 0.51998, pedigree (1,1,4,1,1)
  (same comment as for Aluminium III)
- Barium II [water, surface water]: 4.7516e-7 kg; lognormal variance with pedigree 1.419, pedigree (1,1,4,1,1)
  (same comment as for Aluminium III)
- Copper ion [water, ground-, long-term]: 0.0025699 kg; lognormal variance with pedigree 0.5438, pedigree (1,1,4,1,1)
  (same comment as for Aluminium III)
- Copper ion [water, surface water]: 8.9228e-8 kg; lognormal variance with pedigree 1.6394, pedigree (1,1,4,1,1)
  (same comment as for Aluminium III)
- Heat, waste [water, surface water]: 0.035669 MJ; lognormal variance with pedigree 0.00898726, pedigree (1,1,4,1,1)
  (same comment as for Heat, waste)
- Silver I [water, ground-, long-term]: 0.0030199 kg; lognormal variance with pedigree 0.52329, pedigree (1,1,4,1,1)
  (same comment as for Aluminium III)
- Silver I [water, surface water]: 1.0485e-7 kg; lognormal variance with pedigree 1.6189, pedigree (1,1,4,1,1)
  (same comment as for Aluminium III)
- Strontium [water, ground-, long-term]: 0.24784 kg; lognormal variance with pedigree 0.058621, pedigree (1,1,4,1,1)
  (same comment as for Aluminium III)
- Strontium [water, surface water]: 0.00015617 kg; lognormal variance with pedigree 0.77168, pedigree (1,1,4,1,1)
  (same comment as for Aluminium III)
- Sulfate [water, ground-, long-term]: 0.61344 kg; lognormal variance with pedigree 0.065727, pedigree (1,1,4,1,1)
  (same comment as for Aluminium III)
- Sulfate [water, surface water]: 0.061556 kg; lognormal variance with pedigree 0.19356, pedigree (1,1,4,1,1)
  (same comment as for Aluminium III)
- Water [water, surface water]: 0.00038391 m3; lognormal variance with pedigree 0.10997, pedigree (1,1,4,1,1)
  Process water released to surface water.
  Uncertainty: uncertainty calculated from uncertainty in process water input and the uncertainty of fraction to surface water.
- Zinc II [water, ground-, long-term]: 0.36799 kg; lognormal variance with pedigree 0.035647, pedigree (1,1,4,1,1)
  (same comment as for Aluminium III)
- Zinc II [water, surface water]: 1.0955e-5 kg; lognormal variance with pedigree 1.1516, pedigree (1,1,4,1,1)
  (same comment as for Aluminium III)
