# heat production, natural gas, at boiler condensing modulating >100kW

Dataset: EcoSpold 2, unit process
Geography: Europe without Switzerland
Time period: 2000-01-01 to 2022-12-31
Technology level: current
Classification: EcoSpold01Categories: natural gas/heating systems
Classification: ISIC rev.4 ecoinvent: 3530:Steam and air conditioning supply
Synonyms: Brennwerttechnik
Tags: ConvertedDataset
Scenario: Business-as-Usual
System model: Allocation at the point of substitution
Generated by: Thomas Heck
Published in: Faist Emmenegger, M. 2007
Database: ecoinvent
isCopyrightProtected: true

## General comment
NOx and CO emissions derived from measurements under controlled conditions; no adjustment to real operation made due to lack of information. Other emission data from different references.
[This dataset was already contained in the ecoinvent database version 2. It was not individually updated during the transfer to ecoinvent version 3. Life Cycle Impact Assessment results may still have changed, as they are affected by changes in the supply chain, i.e. in other datasets. This dataset was generated following the ecoinvent quality guidelines for version 2. It may have been subject to central changes described in the ecoinvent version 3 change report (http://www.ecoinvent.org/database/ecoinvent-version-3/reports-of-changes/), and the results of the central updates were reviewed extensively. The changes added e.g. consistent water flows and other information throughout the database. The documentation of this dataset can be found in the ecoinvent reports of version 2, which are still available via the ecoinvent website. The change report linked above covers all central changes that were made during the conversion process.]

## Included activities end
The module includes fuel input from high pressure (RER) network, infrastructure (boiler), emissions to air and water, and electricity needed for operation.

## Geography
Emission data extrapolated from Switzerland to Europe.

## Technology
Models on market

## Parameters
- scaling factor: 0.980392 dimensionless

## Reference product
- heat, district or industrial, natural gas: 1 MJ; = 1.02 * scaling_factor; By-product classification allocatable product; CPC 17300: Steam and hot water
  Amount was scaled to 1.
  EcoSpold01Location=RER
  production volume 2.02e10 MJ
    Assumption. The original value from the global dataset was altered in order to model the correct shares of district/industrial heat producing datasets on the market for heat, district or industrial, natural gas. See talk pages for further discussion.
    A relation of 1:10 between the geographies RER and RoW was assumed.
    //Original comment and value in the global dataset:
    Consumption in industry and heat plants (IEA Balance tables: 22.1 EJ net calorific value = 24.5 EJ gross calorific value) minus the amount used for steam in the chemical industry (7.3EJ), divided evenly over 4 boiler types, multiplied by the conversion efficiency of the boiler type on a gross calorific value basis (91.8%)
    3.9439E+12
  property price 0.0106 EUR2005
    Average European district heat price from Ecoheatcool and Euroheat 2005-2006, Ecoheat Work package 1: The European heat market. Final report. 10.6 EUR/GJ i s the price of district heat. http://www.solarthermalworld.org/files/Ecoheatcool%20WP1%20Web.pdf?download
  properties: Corresponding fuel use 0.980392 MJ, carbon allocation 0 kg, carbon content 0, heating value, net 1 MJ

## Inputs from technosphere
- electricity, low voltage: 0.00108824 kWh; = 0.00111 * scaling_factor; lognormal variance with pedigree 0.16, pedigree (1,1,5,1,1)
  range of electricity for pumps etc., different literature
  Amount was scaled to the amount of reference product.
  EcoSpold01Location=UCTE
- industrial furnace, natural gas: 2.7451e-9 unit; = 2.8E-09 * scaling_factor; lognormal variance with pedigree 0.08, pedigree (1,1,5,1,1)
  EcoSpold01Location=RER
  uncertainty of life time and extrapolation to range of capacity
  Amount was scaled to the amount of reference product.
- natural gas, high pressure: 0.0253477 m3; = 0.0256410256410256 * scaling_factor*36.3/36; lognormal variance with pedigree 0.04, pedigree (1,1,5,1,1)
  Amount was scaled to the amount of reference product.
  EcoSpold01Location=RER
  properties: carbon content, fossil 0.602381, dry mass 0.84 kg, heating value, gross 39 MJ, heating value, net 36 MJ, wet mass 0.84 kg
  note on carbon content, fossil: An average C content of 0.506 kg C/ m3 has been assumed (this average has been calculated using data in Tab 3.5, ecoinvent v2.2 report 6_V
  note on heating value, net: Literature value, Source: Christoph Meili;Niels Jungbluth;Maresa Bussa (2021) Life cycle inventories of crude oil and natural gas extraction. ESU-services Ltd. commissioned by BAFU & VSG, Schaffhausen, Switzerland, http://esu-services.ch/data/public-lci-reports/

## Emissions to nature
- Acetaldehyde [air, urban air close to ground]: 9.80392e-10 kg; = 1E-09 * scaling_factor; lognormal variance with pedigree 1.12, pedigree (1,1,5,1,1)
  rough estimate, high uncertainty
  Amount was scaled to the amount of reference product.
- Acetic acid [air, urban air close to ground]: 1.47059e-7 kg; = 1.5E-07 * scaling_factor; lognormal variance with pedigree 1.12, pedigree (1,1,5,1,1)
  rough estimate, high uncertainty
  Amount was scaled to the amount of reference product.
- Benzene [air, urban air close to ground]: 3.92157e-7 kg; = 4E-07 * scaling_factor; lognormal variance with pedigree 1.12, pedigree (1,1,5,1,1)
  rough estimate, high uncertainty
  Amount was scaled to the amount of reference product.
- Benzo(a)pyrene [air, urban air close to ground]: 9.80392e-12 kg; = 1E-11 * scaling_factor; lognormal variance with pedigree 1.12, pedigree (1,1,5,1,1)
  rough estimate, high uncertainty
  Amount was scaled to the amount of reference product.
- Butane [air, urban air close to ground]: 6.86275e-7 kg; = 7E-07 * scaling_factor; lognormal variance with pedigree 1.12, pedigree (1,1,5,1,1)
  rough estimate, high uncertainty
  Amount was scaled to the amount of reference product.
- Carbon dioxide, fossil [air, urban air close to ground]: 0.054902 kg; = 0.056 * scaling_factor; lognormal variance with pedigree 0.04, pedigree (1,1,5,1,1)
  composition of natural gas
  Amount was scaled to the amount of reference product.
- Carbon monoxide, fossil [air, urban air close to ground]: 2.84314e-6 kg; = 2.9E-06 * scaling_factor; lognormal variance with pedigree 0.8, pedigree (1,1,5,1,1)
  calculated based on (SVGW 2002)
  Amount was scaled to the amount of reference product.
- Dinitrogen monoxide [air, urban air close to ground]: 4.90196e-7 kg; = 5E-07 * scaling_factor; lognormal variance with pedigree 1.12, pedigree (1,1,5,1,1)
  rough estimate, high uncertainty
  Amount was scaled to the amount of reference product.
- Dioxins, measured as 2,3,7,8-tetrachlorodibenzo-p-dioxin [air, urban air close to ground]: 2.94118e-17 kg; = 3E-17 * scaling_factor; lognormal variance with pedigree 1.12, pedigree (1,1,5,1,1)
  rough estimate, high uncertainty
  Amount was scaled to the amount of reference product.
- Formaldehyde [air, urban air close to ground]: 9.80392e-8 kg; = 1E-07 * scaling_factor; lognormal variance with pedigree 1.12, pedigree (1,1,5,1,1)
  rough estimate, high uncertainty
  Amount was scaled to the amount of reference product.
- Mercury II [air, urban air close to ground]: 2.94118e-11 kg; = 3E-11 * scaling_factor; lognormal variance with pedigree 0.69, pedigree (1,1,5,1,1)
  trace element in natural gas
  Amount was scaled to the amount of reference product.
- Methane, fossil [air, urban air close to ground]: 1.96078e-6 kg; = 2E-06 * scaling_factor; lognormal variance with pedigree 1.12, pedigree (1,1,5,1,1)
  rough estimate, high uncertainty
  Amount was scaled to the amount of reference product.
- Nitrogen oxides [air, urban air close to ground]: 1.26471e-5 kg; = 1.29E-05 * scaling_factor; lognormal variance with pedigree 0.23, pedigree (1,1,5,1,1)
  calculated based on (SVGW 2002)
  Amount was scaled to the amount of reference product.
- PAH, polycyclic aromatic hydrocarbons [air, urban air close to ground]: 9.80392e-9 kg; = 1E-08 * scaling_factor; lognormal variance with pedigree 1.12, pedigree (1,1,5,1,1)
  rough estimate, high uncertainty
  Amount was scaled to the amount of reference product.
- Particulate Matter, < 2.5 um [air, urban air close to ground]: 9.80392e-8 kg; = 1E-07 * scaling_factor; lognormal variance with pedigree 0.16, pedigree (1,1,5,1,1)
  literature
  Amount was scaled to the amount of reference product.
- Pentane [air, urban air close to ground]: 1.17647e-6 kg; = 1.2E-06 * scaling_factor; lognormal variance with pedigree 1.12, pedigree (1,1,5,1,1)
  rough estimate, high uncertainty
  Amount was scaled to the amount of reference product.
- Propane [air, urban air close to ground]: 1.96078e-7 kg; = 2E-07 * scaling_factor; lognormal variance with pedigree 1.12, pedigree (1,1,5,1,1)
  rough estimate, high uncertainty
  Amount was scaled to the amount of reference product.
- Propionic acid [air, urban air close to ground]: 1.96078e-8 kg; = 2E-08 * scaling_factor; lognormal variance with pedigree 1.12, pedigree (1,1,5,1,1)
  rough estimate, high uncertainty
  Amount was scaled to the amount of reference product.
- Sulfur dioxide [air, urban air close to ground]: 4.90196e-7 kg; = 5E-07 * scaling_factor; lognormal variance with pedigree 0.04, pedigree (1,1,5,1,1)
  composition of natural gas
  Amount was scaled to the amount of reference product.
- Toluene [air, urban air close to ground]: 1.96078e-7 kg; = 2E-07 * scaling_factor; lognormal variance with pedigree 1.12, pedigree (1,1,5,1,1)
  rough estimate, high uncertainty
  Amount was scaled to the amount of reference product.
- Nitrate [water, surface water]: 1.27451e-7 kg; = 1.3E-07 * scaling_factor; lognormal variance with pedigree 0.34, pedigree (1,1,5,1,1)
  literature, range of values
  Amount was scaled to the amount of reference product.
- Nitrite [water, surface water]: 2.94118e-9 kg; = 3E-09 * scaling_factor; lognormal variance with pedigree 0.34, pedigree (1,1,5,1,1)
  literature, range of values
  Amount was scaled to the amount of reference product.
- Sulfate [water, surface water]: 4.90196e-8 kg; = 5E-08 * scaling_factor; lognormal variance with pedigree 0.34, pedigree (1,1,5,1,1)
  literature, range of values
  Amount was scaled to the amount of reference product.
- Sulfite [water, surface water]: 4.90196e-8 kg; = 5E-08 * scaling_factor; lognormal variance with pedigree 0.34, pedigree (1,1,5,1,1)
  literature, range of values
  Amount was scaled to the amount of reference product.

## Sampling procedure
Literature, manufacturers; CO and NOx emissions from (SVGW 2002), sample size (number of selected devices for which emission values are given in SVGW list): CO 107 , NOx 107 .

## Extrapolations
see Geography

## Review by Michael Spielmann (obsolete) 2003-07-06
Preliminary passed, based on a review of a first draft of the final report. Data have to be validated again after review of the written report.
