# mine construction, open cast, lignite

Dataset: EcoSpold 2, unit process
Geography: RER
Time period: 1983-01-01 to 2022-12-31
Technology level: current
Classification: EcoSpold01Categories: lignite/production
Classification: ISIC rev.4 ecoinvent: 4290:Construction of other civil engineering projects
Tags: ConvertedDataset
Scenario: Business-as-Usual
System model: Allocation at the point of substitution
Generated by: Christian Bauer
Published in: Röder, A. 2007
Database: ecoinvent
isCopyrightProtected: true

## General comment
This dataset represents the construction of an opencast mine for lignite mining. Apart from conveyors, tracks and administration buildings, mainly mobile equipment is used. Thus, material consumption depends particularly on service life of machinery and equipment. According to Schlösser, service life is about 40 to 50 years. Taking maintenance requirements into account an average life time of 30 years is assumed in this dataset. Data is based on three opencast mines: Oberdorf (Austria), Kans-Achinsk/Ekibastuz (Russia) and Rheinbraun AG (Germany). Hence, only figures per ton lignite were given in literature and no information about average annual production of lignite in Europe was available. Due to these facts a total production of 100 million tons has been assumed. It has to be considered that this dataset is based on few data about opencast mines thus it may not reflect specific mines. Even with a broader database it would not have been possible to calculate assured mean values. This is due to the fact that there are big differences between mines and complete data of several hundred mines would have been required.
[This dataset was already contained in the ecoinvent database version 2. It was not individually updated during the transfer to ecoinvent version 3. Life Cycle Impact Assessment results may still have changed, as they are affected by changes in the supply chain, i.e. in other datasets. This dataset was generated following the ecoinvent quality guidelines for version 2. It may have been subject to central changes described in the ecoinvent version 3 change report (http://www.ecoinvent.org/database/ecoinvent-version-3/reports-of-changes/), and the results of the central updates were reviewed extensively. The changes added e.g. consistent water flows and other information throughout the database. The documentation of this dataset can be found in the ecoinvent reports of version 2, which are still available via the ecoinvent website. The change report linked above covers all central changes that were made during the conversion process.]

## Included activities start
From reception of various construction materials (steel, copper, concrete, plywood) for the construction of an opencast mine for lignite mining.

## Included activities end
This activity ends with an opencast mine unit for lignite mining. This dataset includes machinery and equipment with a life time of 30 years because this information is not seperated in the literature given. It also includes requirements for prospecting.This dataset doesn´t include land use because it is not seperated in the available references. Thus, land use is included during operation of the mine.

## Geography
Average data from Austria, Germany and Russian Federation.

## Technology
Average technology of the time period considered.

## Reference product
- mine infrastructure, open cast, lignite: 1 unit; By-product classification allocatable product; CPC 53261: Mining constructions
  Estimation. After operation it is assumed that all materials except from wood on the surface are left in situ.
  EcoSpold01Location=RER
  production volume 1.32237 unit
    This is a placeholder value that does not reflect real-world production volumes. This dataset does not currently require a real-world production volume to work in the database framework, and no actual data were collected yet. This has no negative effect on the results of the ecoinvent database. The placeholder value of this activity was scaled according to the nominal GDP of 2005 (source: United Nations, http://data.un.org/Glossary.aspx?q=GDP+%28current+US%24%29, accessed 20130726) to reflect an appropriate share of the global production volume, which is also a placeholder value.
  property price 6.70931e8 EUR2005
    EU27 I/O database(in the 'EU & DK Input Output Database' (available in SimaPro)); -79 Building, non-residential EU 27 (calculated to be 38.169 EUR2003/kg). Based on consumption of (_53 Iron basic, virgin, EU27;7.25517782294095E-3 kg/EUR building; 0.45 EUR2003 per kg DS), (_61 Iron, after first processing, EU27;5.8766830719783E-3kg/EUR building; 0.62 EUR2003 per kg DS), (_65 Fabricated metal products, except machinery, EU27; 8.9167022775554E-3 kg/EUR building; 3.63 EUR2003 per kg DS) and (_66 Machinery and equipment n.e.c., EU27;4.15071881936446E-3 kg/EUR building; 5.71 EUR2003 per kg DS) -17700000 kg
  properties: carbon allocation 0 kg, carbon content 0

## Inputs from technosphere
- concrete, normal strength: 2517.4, 4581.16 m3 (2 suppliers, which the file names only by identifier); sum of these 7098.56 m3; source Astakhov A. 1984; lognormal variance with pedigree 0.16, pedigree (1,1,5,1,1)
  EcoSpold01Location=CH
  Estimation. For general infrastructure 5 kg/t.a reinforced concrete is used which result in a specific value of 0.17 kg/t pit coal. In Levin a model of an opencast mine is calculated. There, specific concrete consumption of 0.105 kg/t is estimated. Elevators, cooling systems, processing installations, loading facilities, administration buildings and sanitary installations have to be taken into account. It is not clearly possible to differentiate between data belonging to infrastructure and operation of the mine. Due to this, requirements for concrete are included in the infrastructure dataset; the rest of material consumption is considered in the operation dataset.
  Further references:
  Levin B. (1993) CO2-Emissionen von Energiesystemen zur Stromerzeugung unter Berücksichtigung der Energiewandlungsketten. Dissertation TU Berlin.
  properties: dry mass 2190 kg, water content 0.086758, wet mass 2380 kg
- copper, cathode: 699858 kg; source Astakhov A. 1984; lognormal variance with pedigree 0.16, pedigree (1,1,5,1,1)
  Estimation. In this dataset specific copper consumption of 0.007 kg/t pit coal is used. In Levin a model of an opencast mine is calculated. There, data about copper consumption of 0.005 kg/t is estimated. Elevators, cooling systems, processing installations, loading facilities, administration buildings and sanitary installations have to be taken into account. It is not clearly possible to differentiate between data belonging to infrastructure and operation of the mine. Due to this, requirements for copper are included in the infrastructure dataset; the rest of material consumption is considered in the operation dataset.
  Further references:
  Pers. Mitteilung von N. Schlösser, Rheinbraun AG, Köln.
  Levin B. (1993) CO2-Emissionen von Energiesystemen zur Stromerzeugung unter Berücksichtigung der Energiewandlungsketten. Dissertation TU Berlin.
  EcoSpold01Location=RER
  properties: dry mass 1 kg, wet mass 1 kg
- diesel, burned in building machine: 9.99797e7 MJ; lognormal variance with pedigree 0.16, pedigree (1,1,5,1,1)
  EcoSpold01Location=GLO
  Estimation. In this dataset specific diesel consumption of 1 MJ/t pit coal is used.
  properties: heating value, net 1 MJ
- electricity, medium voltage: 8.32831e6 kWh; lognormal variance with pedigree 0.16, pedigree (1,1,5,1,1)
  EcoSpold01Location=UCTE
  Estimation. In this dataset specific electricity consumption of 8.33E-02 kWh/t pit coal is used.
- heat, district or industrial, other than natural gas: 9.99797e7 MJ; lognormal variance with pedigree 0.16, pedigree (1,1,5,1,1)
  EcoSpold01Location=RER
  Estimation. In this dataset specific heat consumption of 1 MJ/t is assumed.
  properties: heating value, net 1 MJ
- plywood: 5498.88 m3; source Astakhov A. 1984; lognormal variance with pedigree 0.16, pedigree (1,1,5,1,1)
  EcoSpold01Location=RER
  Estimation. In this dataset specific plywood consumption of 0.03 kg/t pit coal is used. Elevators, cooling systems, processing installations, loading facilities, administration buildings and sanitary installations have to be taken into account. It is not clearly possible to differentiate between data belonging to infrastructure and operation of the mine. Due to this, requirements for wood are included in the infrastructure dataset; the rest of material consumption is considered in the operation dataset.
  properties: carbon content, fossil 0.09783, carbon content, non-fossil 0.409818, dry mass 768.6 kg, heating value, net 11688.9 MJ, price 400 EUR2005, water content 0.070778, wet mass 823 kg
- reinforcing steel: 1.29974e7 kg; source Astakhov A. 1984; lognormal variance with pedigree 0.16, pedigree (1,1,5,1,1)
  EcoSpold01Location=RER
  Estimation. In this dataset specific steel consumption of 0.13 kg/t pit coal is used. Data about steel amount is nearly the same in all given literature sources, thus robust data about steel consumption can be assumed. In Levin a model of an opencast mine is calculated. There, specific steel consumption of 0.152 kg/t is estimated. Elevators, cooling systems, processing installations, loading facilities, administration buildings and sanitary installations have to be taken into account. It is not clearly possible to differentiate between data belonging to infrastructure and operation of the mine. Due to this, requirements for steel are included in the infrastructure dataset; the rest of material consumption is considered in the operation dataset.
  Further references:
  Pers. Mitteilung von N. Schlösser, Rheinbraun AG, Köln.
  Levin B. (1993) CO2-Emissionen von Energiesystemen zur Stromerzeugung unter Berücksichtigung der Energiewandlungsketten. Dissertation TU Berlin.
  properties: carbon content, fossil 0.004, dry mass 1 kg, wet mass 1 kg
- steel, low-alloyed, hot rolled: 3.99919e6 kg; source Astakhov A. 1984; lognormal variance with pedigree 0.16, pedigree (1,1,5,1,1)
  EcoSpold01Location=RER
  Estimation. In this dataset specific steel consumption of 0.04 kg/t pit coal is used. Data about steel amount is nearly the same in all given literature sources, thus robust data about steel consumption can be assumed. In Levin a model of an opencast mine is calculated. There, specific steel consumption of 0.152 kg/t is estimated. Elevators, cooling systems, processing installations, loading facilities, administration buildings and sanitary installations have to be taken into account. It is not clearly possible to differentiate between data belonging to infrastructure and operation of the mine. Due to this, requirements for steel are included in the infrastructure dataset; the rest of material consumption is considered in the operation dataset.
  Further references:
  Pers. Mitteilung von N. Schlösser, Rheinbraun AG, Köln.
  Levin B. (1993) CO2-Emissionen von Energiesystemen zur Stromerzeugung unter Berücksichtigung der Energiewandlungsketten. Dissertation TU Berlin.
  properties: carbon content, fossil 0.005, dry mass 1 kg, wet mass 1 kg
  note on carbon content, fossil: Low alloyed steel composition given in Tab. 3.2 ecoinvent v2.2 report 10_partII. Steel assumed to have a C content of 0.5%
- waste wood, untreated: -2.99939e6 kg; lognormal variance with pedigree 0.3, pedigree (1,1,1,1,1)
  EcoSpold01Location=CH
  Estimation. It is assumed that after operation the plywood is landfilled.
  production volume
    Calculated from the production volume of mine infrastructure, open cast, lignite in proportion to the respective output amounts.
  properties: carbon content, non-fossil 0.48632, dry mass 0.8 kg, heating value, net 13.99 MJ, water content 0.25, wet mass 1 kg
  note on carbon content, non-fossil: Tab A.4, ecoinvent v2.2 report 13_I. C content has been referred to 1 kg DM,
  note on heating value, net: Value taken from the general comment of the treatment dataset.

## Sampling procedure
literature

## Review by Christian Bauer 2003-08-19
passed

## Review by Roland Hischier 2011-09-22
Transfer of documentation done.
