# treatment of blast furnace gas, in power plant

Dataset: EcoSpold 2, unit process
Geography: HU
Time period: 1980-01-01 to 2022-12-31
Technology level: current
Classification: ISIC rev.4 ecoinvent: 3510:Electric power generation, transmission and distribution
Classification: EcoSpold01Categories: natural gas/power plants
Synonyms: BFG; top gas
Tags: industrial gas power; fossil fuels
Scenario: Business-as-Usual
System model: Allocation at the point of substitution
Generated by: Karin Treyer
Published in: Faist Emmenegger, M. 2007
Database: ecoinvent
isCopyrightProtected: true

## General comment
This dataset has been created as a copy of the dataset for Europe (RER). Production volumes have been adjusted.
This dataset represents the treatment of blast furnace gas in an unspecified gas power plant with high voltage electricity and heat as by-product in Austria in 2012.
According to IEA (2008), blast furnace gas is obtained as a by-product in operating blast furnaces; recovered on leaving the furnace and used partly within the plant and partly in other steel industry processes or used in power stations equipped to burn it.
The efficiency calculations are based on IEA/OECD statistics (fuel inputs, electricity produced). No exergy correction could be made due to incomplete data (see ecoinvent report "Erdgas" p. 128 for details).
Water is used for wet cooling and as feed water in the steam circuit. In this dataset, 100% wet cooling and no once-through cooling is assumed.
EMISSIONS:
Emission data have partly been overtaken from a dataset representing the production of electricity in a natural gas power plant. Data have partly been adapted to the different composition of natural gas and blast furnace gas (see tab. 11.16 in ecoinvent report "Erdgas").
Different sources served as basis for assumption of average emissions. Where possible, the most recent sources were taken into account, whereas older sources were taken in order to determine the remaining data gaps. The emissions have been fixed for the former UCTE region* and have been overtaken as such for all countries without value adaptation (adaptation of the uncertainty). See ecoinvent report "Erdgas" given as main source for details (Tab. 11.15 and tab. 11.18). In the following a short overview:
- Emissions of NOx, CO, CO2, SO2, particles, N2O and CH4 are mainly taken from CORINAIR 2001, Rentz et al. 2002, and Swedish EPA 2000 (see tab. 11.1) and are basically valid for European countries.
- NOx emissions are a major challenge in natural gas power plants. With rising temperature, emissions also rise; band widths of NOx emissions in literature are correspondingly large. There are several methods to diminish these emissions.
- CO is a result of incomplete burning. For economic and technical reasons, plant combustion is optimized and CO emissions are low.
- CO2 and SO2 emissions are depending on the composition of the used fuel.. Due to high shares of CO and CO2 in blast furnace gas, CO2 emissions are relatively high for this type of gas. In contrast, some literature sources assume no sulfur in blast furnace gas, so that SO2 emissions are very low in this dataset.
- Organic compound emissions are estimated on the basis of EPA 1998.
- Particles are assumed to be smaller than 2.5 micro-m
Sources:
EMEP/CORINAIR 2001: Joint EMEP/CORINAIR Atmospheric Emission Inventory Guidebook, Third Edition. Copenhagen: European Environment Agency, 2001. http://reports.eea.eu.int/technical_report_2001_3/en.
Rentz O., Karl U., Peter H. (2002). Ermittlung und Evaluierung von Emissionsfaktoren für Feuerungsanlagen in Deutschland für die Jahre 1995, 2000 und 2010. Deutsch- Französisches Institut für Umweltforschung, Uni Karsruhe. Endbericht. Im Auftrag des Umweltbundesamtes. Forschungsbericht 299 43 142. Umweltbundesamt. Berlin.
Swedish EPA (2000) Emission Factors. Swedish Environmental Protection Agency.
IEA/OECD. 2008. Coal information 2008. International Energy Agency (IEA), Paris Cedex (FR)
*former UCTE: Union for the Coordination of the Transmission of Electricity, since 2009 replaced by ENTSO-E European Network of Transmission System Operators for Electricity.

## Included activities start
From the blast furnace gas ready to be treated in a gas power plant and from the gas power plant ready to produce electricity.

## Included activities end
This treatment activity ends with 1MJ of blast furnace gas treated in a gas power plant.

This dataset includes:
- the emissions from burning
- all operation and maintenance activities and materials of the power plants.
- Cooling: It is a assumed that all plants use wet cooling with a cooling tower. No cooling tower is included in this dataset (will be implemented in future versions)

This dataset doesn"t include
- raw materials extraction, decommissioning and waste treatment as these activities are already included in the infrastructure datasets.
- transformation of the by-product electricity.

## Technology
A natural gas power plant with a capacity of 100 MW is taken as power plant infrastructure. No combined heat and power or combined cycle power plants are taken into account.

## Time period
The annual production volume is valid for the year 2012.

## Parameters
- electrical efficiency, country: 0.3 dimensionless; name efficiency_electrical_country; lognormal variance with pedigree 0.0167, pedigree (4,2,1,1,3)
  Literature value/calculated value. Net electrical efficiency based on the lower heating value (LHV).
  For all OECD countries, the IEA Energy statistics of OECD countries 2014 provides data for the year 2012 on fuel input (TJ, Net calorific value NCV) in CHP plants and electricity plants and gross electricity production (GWh) for each country. Together with the information on own use, the net electrical efficiency based on the NCV is calculated. From the statistics, electricity from coke oven gas is modelled in the dataset "treatment of coal gas", while electricity from "recovered gas (including blast furnace gas and other recovered gas) and gas works gas is modelled with the dataset "treatment of blast furnace gas".
  For all non-OECD countries, data from the IEA Energy statistics of non-OECD countries 2014 and the IEA electricity information have been used. The energy statistics source provides data on fuel input from coke oven gas (coal gas) as well as recovered gases and gas works gas (modelled as blast furnace gas). The electricity information provides information on total electricity production with "gases" (=gas works gas, coke oven gas, blast furnace gas and other recovered gases). This electricity production is allocated to the coal gas and blast furnace gas dataset in ecoinvent based on the fuel input. It cannot be differentiated between electricity only and CHP plants as total values only are given.
  IEA. 2014. Electricity Information 2014. ISBN 978-92-64-21692-1. International Energy Agency (IEA), Paris Cedex (FR).
  IEA/OECD. 2014. Energy statistics of non-OECD countries 2014. International Energy Agency (IEA), Paris Cedex (FR).
  IEA/OECD. 2014. Energy statistics of OECD countries 2014. International Energy Agency (IEA), Paris Cedex (FR).
  The original value calculated by the statistics was 0.082, which seems to be unrealistic. A value of 0.3 is therefore being used (own assumption).
- electrical efficiency, global: 0.343 dimensionless; name efficiency_electrical_global; lognormal variance with pedigree 0.0167, pedigree (4,2,1,1,3)
  Literature value/calculated value. Net electrical efficiency based on the lower heating value (LHV).
  For all OECD countries, the IEA Energy statistics of OECD countries 2014 provides data for the year 2012 on fuel input (TJ, Net calorific value NCV) in CHP plants and electricity plants and gross electricity production (GWh) for each country. Together with the information on own use, the net electrical efficiency based on the NCV is calculated. From the statistics, electricity from coke oven gas is modelled in the dataset "treatment of coal gas", while electricity from "recovered gas (including blast furnace gas and other recovered gas) and gas works gas is modelled with the dataset "treatment of blast furnace gas".
  For all non-OECD countries, data from the IEA Energy statistics of non-OECD countries 2014 and the IEA electricity information have been used. The energy statistics source provides data on fuel input from coke oven gas (coal gas) as well as recovered gases and gas works gas (modelled as blast furnace gas). The electricity information provides information on total electricity production with "gases" (=gas works gas, coke oven gas, blast furnace gas and other recovered gases). This electricity production is allocated to the coal gas and blast furnace gas dataset in ecoinvent based on the fuel input. It cannot be differentiated between electricity only and CHP plants as total values only are given.
  IEA. 2014. Electricity Information 2014. ISBN 978-92-64-21692-1. International Energy Agency (IEA), Paris Cedex (FR).
  IEA/OECD. 2014. Energy statistics of non-OECD countries 2014. International Energy Agency (IEA), Paris Cedex (FR).
  IEA/OECD. 2014. Energy statistics of OECD countries 2014. International Energy Agency (IEA), Paris Cedex (FR).
- fraction, cooling water, to air: 0.0118019 dimensionless; name fraction_CW_to_air; lognormal variance with pedigree 0.04, pedigree (1,1,1,1,1)
- relation between the global and the country's efficiency: 1.14333 dimensionless; name relation_global_country; = efficiency_electrical_global/ efficiency_electrical_country
  This factor brings the amounts of the exchanges in the global dataset into relation with the amounts in the country datasets.
- thermal efficiency: 0.145 dimensionless; name efficiency_thermal; lognormal variance with pedigree 0.0122, pedigree (2,3,1,5,3)
  Estimation. Value taken over from the global dataset.
  Global value: Literature value/calculation for the thermal efficiency. IEA/OECD statistics provided data for OECD countries in total: Fuel input in CHP plants and the electricity and heat output. Not enough detailed data were available for non-OECD countries and/or the whole world, so that for this global dataset, the OECD value was overtaken. Data are for the category "coal manufactured gases" including coke oven gas, blast furnace gas and oxygen steel furnace gas. Fuel input data in the statistics are expressed in gross calorific values. Net calorific values are calculated according to IEA/OECD p. I.7 by multiplying the gross heat content with a factor 0.9, taking therefore the lower factor for coke oven gas, corresponding to a worst case scenario (blast furnace gas and oxygen steel furnace gas have a gross to net ratio of 1).
  IEA/OECD. 2010. Electricity Information 2010. International Energy Agency (IEA), Paris Cedex (FR). Part IV. Detailed OECD Electricity And Heat Data.
  nan

## Reference product
- electricity, high voltage: 1 kWh; name electricity; = blast_furnace_gas*efficiency_electrical_country*(-1)/3.6; source IEA/OECD 2010, p. II.8ff; By-product classification allocatable product; CPC 17100: Electrical energy
  Amount was scaled to the amount of reference product.
  production volume 6.40949e7 kWh
    Literature value/calculated value. Net electricity production in 2012.
    For all OECD countries, the IEA Energy statistics of OECD countries 2014 provides data for the year 2012 on gross electricity production (GWh) for each country. Together with the information on own use, the net electrical efficiency based on the NCV is calculated. From the statistics, electricity from coke oven gas is modelled in the dataset "treatment of coal gas", while electricity from "recovered gas (including blast furnace gas and other recovered gas) and gas works gas is modelled with the dataset "treatment of blast furnace gas".
    For all non-OECD countries, data from the IEA Energy statistics of non-OECD countries 2014 and the IEA electricity information have been used. The energy statistics source provides data on fuel input from coke oven gas (coal gas) as well as recovered gases and gas works gas (modelled as blast furnace gas). The electricity information provides information on total electricity production with "gases" (=gas works gas, coke oven gas, blast furnace gas and other recovered gases). This electricity production is allocated to the coal gas and blast furnace gas dataset in ecoinvent based on the fuel input. It cannot be differentiated between electricity only and CHP plants as total values only are given.
    IEA. 2014. Electricity Information 2014. ISBN 978-92-64-21692-1. International Energy Agency (IEA), Paris Cedex (FR).
    IEA/OECD. 2014. Energy statistics of non-OECD countries 2014. International Energy Agency (IEA), Paris Cedex (FR).
    IEA/OECD. 2014. Energy statistics of OECD countries 2014. International Energy Agency (IEA), Paris Cedex (FR).
  property exergy 3.6 MJ; name electricity_exergy
    This exergy property is based on the exergy content of the product.
  property price 0.0977 EUR2005
    Temporary price data. Calculated as 90% of purchasers price based on: 94% of the average price (to account for a 6% loss in transformation and transmission) for electricity for industrial consumersin 2005 (excluded taxes). From IEA.
  property true value relation 3.6; name electricity_true_value_relation
    property to calculate "true value" from
  properties: carbon allocation 0 kg, carbon content 0

## Inputs from technosphere
- aluminium, wrought alloy: 5.72899e-6 kg
- argon, liquid: 7.62761e-6 kg
- basic oxygen furnace dust: -2.44286e-6, -3.64349e-5 kg (2 suppliers, which the file names only by identifier); sum of these -3.88778e-5 kg
- basic oxygen furnace secondary metallurgy slag: -5.65046e-7 kg
- basic oxygen furnace slag: -0.000729993 kg
- basic oxygen furnace sludge: -5.65046e-7 kg
- basic oxygen furnace waste: -0.000218507 kg
- blast furnace: 4.3332e-12 unit
- blast furnace gas: -1.41247 MJ
- blast furnace slag: -0.130974 kg
- blast furnace sludge: -0.00519997 kg
- blast oxygen furnace converter: 5.57004e-14 unit
- calcium carbide, technical grade: 1.24357e-5 kg
- coke: 4.2331 MJ
- compressed air, 600 kPa gauge: 2.70918e-5 m3
- copper, cathode: 5.20817e-8 kg
- diesel: 2.13159e-6, 2.55846e-10, 5.22775e-11, 3.61686e-11, 5.09875e-9, 1.22996e-11 kg (6 suppliers, which the file names only by identifier); sum of these 2.13705e-6 kg
- dolomite: 0.0010658 kg
- electricity, medium voltage: 1.78747e-7, 2.41354e-7, 3.47113e-7, 7.24572e-8, 4.24405e-6, 2.29021e-5, 2.29214e-7, 8.5833e-8, 1.08314e-6, 7.14621e-6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 kWh (45 suppliers, which the file names only by identifier); sum of these 0.00026951 kWh
- electrode, negative, Ni: 3.38531e-7 kg
- ferromanganese, high-coal, 74.5% Mn: 4.15379e-5 kg
- ferronickel: 8.45314e-5 kg
- ferrosilicon: 4.9667e-7 kg
- hard coal: 5.19997e-10 kg
- heat, district or industrial, other than natural gas: 0.018716 MJ
- inert waste, for final disposal: -1.06263e-6 kg
- iron ore concentrate: 1.1701e-6, 0.0987669 kg (2 suppliers, which the file names only by identifier); sum of these 0.0987681 kg
- iron pellet: 0.128699 kg
- iron scrap, sorted, pressed: 0.000732186 kg
- iron sinter: 0.298998 kg
- lime: 0.00015009 kg
- limestone, unprocessed: 0.000867745 kg
- liquefied petroleum gas: 1.21808e-9, 8.51096e-11, 6.71585e-7, 1.26836e-10, 3.82384e-10, 1.81064e-8 kg (6 suppliers, which the file names only by identifier); sum of these 6.91504e-7 kg
- manganese: 1.32572e-6 kg
- mill scale: -1.24543e-7 kg
- molybdenite: 1.12049e-6 kg
- natural gas, high pressure: 1.86079e-8, 7.85444e-9, 4.49845e-8, 1.33497e-8, 7.55203e-7, 7.71877e-8, 8.42567e-9, 2.48629e-10, 2.99183e-8, 3.14178e-8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 m3 (24 suppliers, which the file names only by identifier); sum of these 2.25828e-6 m3
- nickel, class 1: 3.8067e-8 kg
- nitrogen, liquid: 0.0102785 kg
- oxygen, liquid: 0.0177631 kg
- pig iron: 0.00232445, 0.00163041 kg (2 suppliers, which the file names only by identifier); sum of these 0.00395486 kg
- propane: 8.16737e-7 kg
- quicklime, in pieces, loose: 8.42178e-5 kg
- sponge iron: 1.46612e-6, 5.05694e-5 kg (2 suppliers, which the file names only by identifier); sum of these 5.20356e-5 kg
- steam, in chemical industry: 0.0471486 kg
- wastewater from pig iron production: -0.000194482 m3
- wastewater, average: -1.33544e-10, -1.30664e-6 m3 (2 suppliers, which the file names only by identifier); sum of these -1.30678e-6 m3

## Inputs from nature
- Water, cooling, unspecified natural origin [natural resource, in water]: 1.08497e-5 m3
- Water, unspecified natural origin [natural resource, in ground]: 0.000239953 m3
- Water, unspecified natural origin [natural resource, in water]: 1.63347e-6 m3

## Emissions to nature
- Carbon dioxide, fossil [air, unspecified]: 0.0661037 kg
- Carbon monoxide, fossil [air, unspecified]: 0.000449662 kg
- Chromium III [air, unspecified]: 4.76789e-10 kg
- Copper ion [air, unspecified]: 3.17994e-10 kg
- Dioxins, measured as 2,3,7,8-tetrachlorodibenzo-p-dioxin [air, unspecified]: 1.05392e-15 kg
- Heat, waste [air, unspecified]: 0.000384517 MJ
- Hydrogen sulfide [air, unspecified]: 3.4921e-6 kg
- Iron ion [air, unspecified]: 7.72993e-8 kg
- Lead II [air, unspecified]: 2.44241e-8 kg
- Manganese II [air, unspecified]: 2.6878e-8 kg
- Nickel II [air, unspecified]: 5.18599e-9 kg
- Nitrogen oxides [air, unspecified]: 2.59993e-5 kg
- PAH, polycyclic aromatic hydrocarbons [air, unspecified]: 1.90607e-11 kg
- Particulate Matter, < 2.5 um [air, unspecified]: 9.52818e-6 kg
- Particulate Matter, > 10 um [air, unspecified]: 5.18599e-7 kg
- Particulate Matter, > 2.5 um and < 10um [air, unspecified]: 5.18599e-7 kg
- Sulfur dioxide [air, unspecified]: 4.32182e-5 kg
- Water [air, non-urban air or from high stacks]: 3.26695e-7 m3
- Water [air, unspecified]: 5.94838e-5 m3

## Sampling procedure
Literature and statistics

## Extrapolations
Emission data partly taken over from natural gas power plants.
Emission data partly from old references.
A natural gas power plant is taken as input.

## Review by Carl Vadenbo 2015-05-21
The update of the whole electricity sector for the ecoinvent v3.2 database consist of hundreds of datasets. All these datasets have passed through a streamlined review processes where the underlying modelling of production volumes, technology shares and efficiencies was reviewed in detail prior to the datasets being submitted to the database.
