# treatment of scrap copper, municipal incineration

Dataset: EcoSpold 2, unit process
Geography: Europe without Switzerland
Time period: 2006-01-01 to 2022-12-31
Technology level: current
Classification: ISIC rev.4 ecoinvent: 3821:Treatment and disposal of non-hazardous waste
Synonyms: Siedlungsabfallverbrennung; Kehrichtverbrennung; municipal waste incineration
Scenario: Business-as-Usual
System model: Allocation at the point of substitution
Generated by: [System]
Database: ecoinvent
isCopyrightProtected: true

## General comment
This dataset represents the activity of waste disposal of scrap copper in a municipal solid waste incinerator (MSWI) // Recommended use of this dataset: For disposal of bulky, non-dust copper, which goes to incineration as part of a larger item or in small amounts only. Pure, isolated copper fractions will not be disposed in incinerators, but rather go to recycling. // // Waste composition (wet, in ppm): H2O n.a.; O n.a.; H n.a.; C n.a.; S n.a.; N n.a.; P n.a.; B n.a.; Cl n.a.; Br n.a.; F n.a.; I n.a.; Ag n.a.; As n.a.; Ba n.a.; Cd n.a.; Co n.a.; Cr n.a.; Cu 1000000; Hg n.a.; Mn n.a.; Mo n.a.; Ni n.a.; Pb n.a.; Sb n.a.; Se n.a.; Sn n.a.; V n.a.; Zn n.a.; Be n.a.; Sc n.a.; Sr n.a.; Ti n.a.; Tl n.a.; W n.a.; Si n.a.; Fe n.a.; Ca n.a.; Al n.a.; K n.a.; Mg n.a.; Na n.a.; // Share of carbon in waste that is biogenic 60.4%. // Share of metals in waste not oxidised and bulk-recyclable (exclude very small or thin parts) Iron: 0%; Alu: 0%; Copper: 100%. // One kg of this waste produces 0.8298 kg of slag and 0 kg of residues, which are landfilled. // Net energy production: 0MJ/kg electric energy and 0MJ/kg thermal energy. // Recovery of metal scrap to recycling: 0g iron scrap, 0g aluminium scrap, 310g copper scrap.

## Included activities start
waste incineration from waste reception gate and delivery into waste bunker at incinerator plant site (without transports to the incinerator)

## Included activities end
Waste-specific short-term emissions to water from leachate. Long-term emissions from landfill to ground water.

## Geography
Specific to the technology mix encountered in Switzerland in 2010. Well applicable to modern incineration practices in Europe, North America or Japan.
This dataset has been extrapolated from the global dataset.

## Technology
average Swiss MSWI plants in 2010 (grate incinerators) with electrostatic precipitator for fly ash (ESP), wet flue gas scrubber and 25% SNCR , 42.77% SCR-high dust , 32.68% SCR-low dust -DeNOx facilities and 0% without Denox (weighted according to mass of burnt waste, representing Swiss average). Efficiency of iron scrap separation from slag : 58%. Efficiency of non-ferrous scrap separation from slag : 31%. Gross electric efficiency technology mix 15.84% and Gross thermal efficiency technology mix 28.51%

## Time period
Waste composition as given in literature reference, theoretical data or other source. Transfer coefficients for modern MSWI.

## Reference product
- scrap copper: -1 kg; name RP; By-product classification Waste; CPC 39361: Waste and scrap of copper; CAS 7440-50-8
  Main reference product of this activity (supply of disposal service).
  production volume 8.1144e7 kg
    Calculated. Scaled down from the global production volume using GDP.
    The GDP of Europe without Switzerland in 2005 was 32.2% of the global GDP.
  property price 0 EUR2005
    Waste products are assigned a price of zero as they are assumed to require further treatment.
  properties: carbon allocation 0 kg, carbon content 0, carbon content, fossil 0, carbon content, non-fossil 0, dry mass 1 kg, water content 0, water in wet mass 0 kg, wet mass 1 kg

## Inputs from technosphere
- copper scrap, sorted, pressed: -0.31 kg; name ByP_01; lognormal variance with pedigree 0.009084, pedigree (1,1,1,1,1)
  Copper scrap recovered from this waste.
  production volume
    calculated in proportion to reference product waste input to incinerator
  properties: dry mass 1 kg, price 2.84 EUR2005, wet mass 1 kg
- electricity, for reuse in municipal waste incineration only: 0.000288678, 0.00652609, 0.00109549, 0.00161117, 0.000106095, 0.0050827, 0.00729096, 0.00047126, 0.000592159, 8.63565e-5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 kWh (19 suppliers, which the file names only by identifier); sum of these 0.071444 kWh; lognormal variance with pedigree 0.00859512, pedigree (1,1,4,1,1)
  Net electricity required to incinerate this waste (subsidiesed from high-calorific waste fractions).
- municipal waste incineration facility: 2.5e-10 unit
  Demands per kilogram waste.
- process-specific burdens, slag landfill: 0.82975 kg; lognormal variance with pedigree 0.0117253, pedigree (1,1,4,1,1)
  Mass-specific expenditures required for landfilling of bottom ash.;activityLink introduced to establish a direct link to the corresponding regional supply of this product
- slag landfill: 1.4751e-9 unit; lognormal variance with pedigree 0.0117253, pedigree (1,1,4,1,1)
  Landfill infrastructure required for landfilling of bottom ash.
- transport, freight, lorry, unspecified: 0.03319 metric ton*km; lognormal variance with pedigree 0.0117253, pedigree (1,1,4,1,1)
  Transport services to transport incineration residues to landfills.

## Emissions to nature
- Benzene [air, urban air close to ground]: 4.9984e-8 kg; lognormal variance with pedigree 0.0491, pedigree (1,1,4,1,1)
  Incomplete combustion product emitted to air.
- Benzene, hexachloro- [air, urban air close to ground]: 1.0451e-10 kg; lognormal variance with pedigree 0.0491, pedigree (1,1,4,1,1)
  Incomplete combustion product emitted to air.
- Benzene, pentachloro- [air, urban air close to ground]: 2.6408e-10 kg; lognormal variance with pedigree 0.0491, pedigree (1,1,4,1,1)
  Incomplete combustion product emitted to air.
- Benzo(a)pyrene [air, urban air close to ground]: 1.1123e-12 kg; lognormal variance with pedigree 0.30974, pedigree (1,1,4,1,1)
  Incomplete combustion product emitted to air.
- Carbon monoxide, fossil [air, urban air close to ground]: 3.3639e-5 kg; lognormal variance with pedigree 0.65557, pedigree (1,1,4,1,1)
  Incomplete combustion product emitted to air.
- Carbon monoxide, non-fossil [air, urban air close to ground]: 5.1329e-5 kg; lognormal variance with pedigree 0.65557, pedigree (1,1,4,1,1)
  Incomplete combustion product emitted to air.
- Dioxins, measured as 2,3,7,8-tetrachlorodibenzo-p-dioxin [air, urban air close to ground]: 9.9962e-14 kg; lognormal variance with pedigree 0.30974, pedigree (1,1,4,1,1)
  Incomplete combustion product emitted to air.
- Heat, waste [air, urban air close to ground]: 0.20934 MJ; lognormal variance with pedigree 0.00898726, pedigree (1,1,4,1,1)
  Waste heat generated from heating value of this waste plus any electricity required to process it.
- Methane, fossil [air, urban air close to ground]: 2.9683e-7 kg; lognormal variance with pedigree 0.0491, pedigree (1,1,4,1,1)
  Incomplete combustion product emitted to air.
- Methane, non-fossil [air, urban air close to ground]: 4.5293e-7 kg; lognormal variance with pedigree 0.0491, pedigree (1,1,4,1,1)
  Incomplete combustion product emitted to air.
- NMVOC, non-methane volatile organic compounds [air, urban air close to ground]: 2.2748e-6 kg; lognormal variance with pedigree 0.0491, pedigree (1,1,4,1,1)
  Incomplete combustion product emitted to air.
- Particulate Matter, < 2.5 um [air, urban air close to ground]: 5.9677e-6 kg; lognormal variance with pedigree 0.30974, pedigree (1,1,4,1,1)
  Incomplete combustion product emitted to air.
- Particulate Matter, > 2.5 um and < 10um [air, urban air close to ground]: 2.9989e-8 kg; lognormal variance with pedigree 0.12811, pedigree (1,1,4,1,1)
  Incomplete combustion product emitted to air.
- Phenol, pentachloro- [air, urban air close to ground]: 2.1767e-11 kg; lognormal variance with pedigree 0.0491, pedigree (1,1,4,1,1)
  Incomplete combustion product emitted to air.
- Toluene [air, urban air close to ground]: 9.9969e-8 kg; lognormal variance with pedigree 0.0491, pedigree (1,1,4,1,1)
  Incomplete combustion product emitted to air.
- Water [air, urban air close to ground]: 0.00082159 m3; lognormal variance with pedigree 0.12113, pedigree (1,1,4,1,1)
  Water vapour from waste humidity, hydrogen oxidation and part of the process water.
- Copper ion [water, ground-, long-term]: 0.68998 kg; lognormal variance with pedigree 0.008, pedigree (1,1,4,1,1)
  Long-term emissions from landfilling of incineration residues.
- Copper ion [water, surface water]: 2.3956e-5 kg; lognormal variance with pedigree 1.1036, pedigree (1,1,4,1,1)
  Emissions to water from waste composition and transfer coefficients in incinerator and landfills.
- Heat, waste [water, surface water]: 0.047862 MJ; lognormal variance with pedigree 0.00898726, pedigree (1,1,4,1,1)
  (same comment as for Heat, waste)
- Water [water, surface water]: 0.00042866 m3; lognormal variance with pedigree 0.10997, pedigree (1,1,4,1,1)
  Process water released to surface water.

## Extrapolations
This dataset has been extrapolated from the global dataset which is based on data from Switzerland.
