# treatment of sewage sludge, 75% water, WWT, WW from tube collector production, sanitary landfill

Dataset: EcoSpold 2, unit process
Geography: GLO
Time period: 1994-01-01 to 2022-12-31
Technology level: current
Classification: ISIC rev.4 ecoinvent: 3821:Treatment and disposal of non-hazardous waste
Scenario: Business-as-Usual
System model: Allocation at the point of substitution
Generated by: Nikolia Stoikou
Database: ecoinvent
isCopyrightProtected: true

## General comment
The process represents the treatment of a waste (sewage sludge) that is exclusively generated from another waste treatment. Sewage sludge is generated in the wastewater treatment of 'wastewater from tube collector production'. Recommended use of this dataset: to be used within the specific chain of treatments for 'wastewater from tube collector production'. Share of biogenic carbon in the sludge: 0%. Landfill gas capture and utilisation generates 0.03321 kWh of electricity and 0.0599 MJ of useful heat. 0.002598 kg waste mass remains in the landfill even after the long term period.

## Included activities start
The activity starts with the waste being available at the gate of the treatment facility. Collection and transportation of the waste to the treatment plant is not included.

## Included activities end
The activity ends with the waste being treated and waste-specific emissions from the landfill are released to the environment (air due to landfil gas and water due to landfil leachate).

## Geography
Landfill site with mean annual temperature (MAT) of 16.743579766537 degC, mean annual precipitation (MAP) of 1250.84108527132 mm/year, and net infiltration of 790.252035689178 mm/year.The leachate percolating through the landfill has an average residence time of 6.33 years.
References: UN data, 2020. Precipitation, Environment Statistics Database, United Nations Statistics Division Available at: http://data.un.org/Data.aspx?q=precipitation&d=ENV&f=variableID%3a6;
World Bank, 2022. Surface area (sq.km), World Bank Group Available at: https://data.worldbank.org/indicator/AG.SRF.TOTL.K2;
Doka G.,2021. A model for composition-specific life cycle inventories of regionalised wastewater fates, Zurich, Switzerland. http://www.doka.ch/publications.htm

## Technology
Sanitary (controlled) landfill for municipal solid waste. Ultimate average landfill height is 20 meters. Operation phase duration is 30 years. The total raw landfill gas mass produced in the landfill from this waste is 0.02899 kg. The total CH4 mass in the raw landfill gas is 0.0002996 kg. Percentage of landfill gas directly emitted is 47w%. Percentage of landfill gas captured and flared is 18.02w%. Percentage of landfill gas captured and utilised is 34.98%. Conversion efficiencies are 27.8e% for electricity and 13.5e% for useful heat. Leachate generated during the first 100 years is collected and treated region-specifically before emission. Based on average waste composition and climate data the end of carbonate phase is estimated to be reached 2'863 years after waste deposition.

## Reference product
- heat, district or industrial, other than natural gas: 1 MJ; By-product classification allocatable product; CPC 17300: Steam and hot water; lognormal variance with pedigree 0.58084, pedigree (1,1,1,1,1)
  Net production of heat from landfill gas utilisation.
  Uncertainty: Uncertainty calculated depending on waste input and uncertainty of transfer coefficients in landfill to landfill gas, uncertainty in gas capture and utilisation.
  production volume 1.25929e-9 MJ
    Calculated from the production volume of the reference product in proportion to the respective output amounts.
  property corresponding fuel use, propane, furnace >100kW 0 MJ; name fuel_use
    Lower heating value of the fuel input related to the heat/electricity output, taken directly from ecoinvent v3.0 dataset "heat production, natural gas, at industrial furnace >100kW, GLO 2000".
  property price 0.0106 EUR2005
    Average European district heat price from Ecoheatcool and Euroheat 2005-2006, Ecoheat Work package 1: The European heat market. Final report. 10.6 EUR/GJ i s the price of district heat. http://www.solarthermalworld.org/files/Ecoheatcool%20WP1%20Web.pdf?download
  properties: carbon allocation 0 kg, carbon content 0, carbon content, fossil 0, carbon content, non-fossil 0, dry mass 1 kg, heating value, net 1 MJ, water content 0, water in wet mass 0 kg, wet mass 1 kg

## Inputs from technosphere
- EUR-flat pallet: 8.88395e-8, 5.75005e-9 unit (2 suppliers, which the file names only by identifier); sum of these 9.45896e-8 unit
- aluminium, wrought alloy: 7.85908e-6 kg
- chemical, organic: 2.24545e-6 kg
- electricity, medium voltage: 5.78234e-6, 1.62741e-5, 1.55567e-6, 4.33377e-7, 5.28756e-6, 0.000568447, 7.34202e-7, 2.79513e-5, 0.000177374, 3.50429e-5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 kWh (47 suppliers, which the file names only by identifier); sum of these 0.00314363 kWh
- glass tube, borosilicate: 0.00294715 kg
- hazardous waste, for incineration: -4.16554e-5, -2.73e-6, -5.23622e-7 kg (3 suppliers, which the file names only by identifier); sum of these -4.4909e-5 kg
- heat, district or industrial, natural gas: 0.000178132, 0.00270686, 4.44807e-5, 8.36504e-7 MJ (4 suppliers, which the file names only by identifier); sum of these 0.00293031 MJ
- hydrochloric acid, without water, in 30% solution state: 1.365e-6, 2.10895e-5 kg (2 suppliers, which the file names only by identifier); sum of these 2.24545e-5 kg
- municipal solid waste: -7.71287e-9, -1.9695e-9, -6.15739e-9, -9.29348e-10, -6.93168e-9, -4.31146e-9, -9.05082e-9, -5.17664e-10, -7.86176e-10, -3.99574e-9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 kg (40 suppliers, which the file names only by identifier); sum of these -5.61363e-6 kg
- steel, chromium steel 18/8, hot rolled: 7.29771e-5 kg
- tap water: 1.53898e-5, 0.000641351, 2.54342e-5, 1.14378e-5, 4.7459e-5, 0.0073393, 1.66846e-5, 0.000532349, 0.000127851 kg (9 suppliers, which the file names only by identifier); sum of these 0.00875726 kg
- waste glass: -6.95192e-9, -4.00392e-7, -1.251e-7, -2.43212e-8, -4.56471e-7, -9.59076e-7, -3.64587e-7, -1.04058e-5, -2.58924e-6, -4.7191e-7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 kg (43 suppliers, which the file names only by identifier); sum of these -0.000134727 kg
- wastewater from tube collector production: -8.71767e-6, -3.95832e-8 m3 (2 suppliers, which the file names only by identifier); sum of these -8.75726e-6 m3
- xenon, gaseous: 1.02548e-5, 6.6373e-7 kg (2 suppliers, which the file names only by identifier); sum of these 1.09185e-5 kg
