# wood cladding production, softwood

Dataset: EcoSpold 2, unit process
Geography: CA-QC
Time period: 2012-01-01 to 2022-12-31
Technology level: current
Classification: EcoSpold01Categories: wooden materials/extraction
Classification: ISIC rev.4 ecoinvent: 1622:Manufacture of builders' carpentry and joinery
Synonyms: siding
Tags: single enterprise data
Scenario: Business-as-Usual
System model: Substitution, consequential, long-term
Share of production covered: 85 %
Generated by: Hugues Imbeault-Tétreault
Database: ecoinvent
isCopyrightProtected: true
accessRestrictedTo: 1

## General comment
This dataset represents the production of stained solid softwood cladding in the region of Quebec for outdoor use. Wood cladding is an exterior wall cladding, which consists of wood boards of different cross-sections (see figure) sawn out of beams (softwood in this case) and then stained. They are most of the time installed on house walls, horizontally or vertically jointed. The functional unit represents 1 m² of covered exterior wall with stained wood cladding. The average overlap of the installed cladding on the wall is 20% (overlap area / board area).

## Included activities start
This activity starts with the raw material delivery at the factory gate.

## Included activities end
This activity ends with the ready for shipping packaged softwood wood cladding at the factory gate.
The dataset includes the raw materials and energy consumption for production, waste generation, estimation of the infrastructure (approximation) and VOC emissions. The colour and acrylic varnish components are directly included since the composition information has been provided by the data provider through Material Safety Data Sheets for these inputs. The included components represent 99.15% of the combined total mass of the colour and acrylic varnish.
The dataset does not include LDPE film as primary packaging (0.09 kg LDPE/m² of cladding) according to ecoinvent guidelines.

## Geography
Data from a single manufacturing company in the region of Québec. They are used as average for the region of Québec.

## Reference product
- wood cladding, softwood: 1 m2; By-product classification allocatable product; CPC 31600: Builders' joinery and carpentry of wood (including cellular wood panels, assembled parquet panels, shingles an[…]
  production volume 1.35e6 m2
  properties: carbon allocation 3.01826 kg, carbon content 0.50147, carbon content, fossil 0.00747019, carbon content, non-fossil 0.494, dry mass 6.01883 kg, price 8.83547 EUR2005, water content 0.15, water in wet mass 0.902825 kg, wet mass 6.92166 kg

## Inputs from technosphere
- acrylic binder, with water, in 54% solution state: 0.153686 kg; lognormal variance with pedigree 0.1287, pedigree (5,5,5,3,4)
  properties: carbon content, fossil 0.643752, dry mass 0.54 kg, heating value, net 18.18 MJ, water content 0.851852, wet mass 1 kg
- aluminium hydroxide: 0.00366684 kg; lognormal variance with pedigree 0.0046, pedigree (3,4,4,1,1)
  properties: dry mass 1 kg, wet mass 1 kg
- carbon black: 0.000798487 kg; lognormal variance with pedigree 0.0046, pedigree (3,4,4,1,1)
  properties: carbon content, fossil 0.85, dry mass 1 kg, heating value, net 25.76 MJ, wet mass 1 kg
- chlorothalonil: 0.00147135 kg; lognormal variance with pedigree 0.0046, pedigree (3,4,4,1,1)
  properties: carbon content, fossil 0.360902, dry mass 1 kg, wet mass 1 kg
- clay: 0.00235021 kg; lognormal variance with pedigree 0.0046, pedigree (3,4,4,1,1)
  properties: dry mass 0.965 kg, water content 0.0362694, wet mass 1 kg
- diesel, burned in building machine: 0.621424 MJ; lognormal variance with pedigree 0, pedigree (1,1,4,1,1)
  properties: density 0.84 kg/l, heating value, net 1 MJ, literFuel_Input 0.0172848 l
- diethylene glycol: 0.00147693 kg; lognormal variance with pedigree 0.0046, pedigree (3,4,4,1,1)
  properties: carbon content, fossil 0.45283, dry mass 1 kg, heating value, net 25.14 MJ, wet mass 1 kg
- electricity, medium voltage: 2.2938 kWh; lognormal variance with pedigree 0.0026, pedigree (1,4,4,1,1)
- epoxy resin, liquid: 0.00261721 kg; lognormal variance with pedigree 0.0026, pedigree (1,4,4,1,1)
  properties: carbon content, fossil 0.42325, dry mass 1 kg, heating value, net 12.82 MJ, wet mass 1 kg
- ethylene glycol: 0.00559601 kg; lognormal variance with pedigree 0.0046, pedigree (3,4,4,1,1)
  properties: carbon content, fossil 0.387097, dry mass 1 kg, heating value, net 23.44 MJ, wet mass 1 kg
- ethylene glycol monoethyl ether: 0.00997443 kg; lognormal variance with pedigree 0.0046, pedigree (3,4,4,1,1)
  properties: carbon content, fossil 0.610169, dry mass 1 kg, heating value, net 29.6 MJ, wet mass 1 kg
- feldspar: 0.00142492 kg; lognormal variance with pedigree 0.0046, pedigree (3,4,4,1,1)
  properties: dry mass 1 kg, wet mass 1 kg
- heat, district or industrial, other than natural gas: 3.67274 MJ; lognormal variance with pedigree 0, pedigree (1,1,4,1,1)
  properties: Corresponding fuel use 1.0526 MJ, density 0.84 kg/l, heating value, net 1 MJ, literFuel_Input 0.107782 l
- kaolin: 0.00854951 kg; lognormal variance with pedigree 0.0046, pedigree (3,4,4,1,1)
  properties: dry mass 1 kg, wet mass 1 kg
- limestone, crushed, washed: 0.0058792 kg; lognormal variance with pedigree 0.0046, pedigree (3,4,4,1,1)
  properties: carbon content, fossil 0.117257, dry mass 0.998 kg, water content 0.00200401, wet mass 1 kg
- lubricating oil: 0.000495334 kg; lognormal variance with pedigree 0.0026, pedigree (1,4,4,1,1)
  properties: carbon content, fossil 0.75, dry mass 1 kg, heating value, net 40.2 MJ, wet mass 1 kg
- propylene glycol, liquid: 0.000795376 kg; lognormal variance with pedigree 0.0046, pedigree (3,4,4,1,1)
  properties: carbon content, fossil 0.473684, dry mass 1 kg, heating value, net 27.09 MJ, wet mass 1 kg
- sawnwood, board, softwood, dried (u=10%), planed: 0.023857 m3; lognormal variance with pedigree 0.0026, pedigree (1,4,4,1,1)
  properties: carbon content, non-fossil 0.494, dry mass 428.533 kg, heating value, net 6218.91 MJ, water content 0.15, wet mass 492.813 kg
- silica sand: 0.0065351 kg; lognormal variance with pedigree 0.0046, pedigree (3,4,4,1,1)
  properties: dry mass 0.99 kg, water content 0.010101, wet mass 1 kg
- sodium hydroxide, without water, in 50% solution state: 0.000602397 kg; lognormal variance with pedigree 0.0026, pedigree (1,4,4,1,1)
  properties: dry mass 1 kg, heating value, net 3.03 MJ, wet mass 1 kg
- tap water: 2.25762 kg; lognormal variance with pedigree 0.0026, pedigree (1,4,4,1,1)
  properties: carbon content, fossil 0.00178991, dry mass 0.000337476 kg, water content 2962.17, wet mass 1 kg
- titanium dioxide: 0.0384817 kg; lognormal variance with pedigree 0.0046, pedigree (3,4,4,1,1)
  properties: dry mass 1 kg, wet mass 1 kg
- waste paint: -7.47844e-5 kg; lognormal variance with pedigree 0.0026, pedigree (1,4,1,1,1)
  properties: carbon content, fossil 0.65, dry mass 1 kg, heating value, net 19.7 MJ, wet mass 1 kg
- wastewater, average: -0.00202413 m3; lognormal variance with pedigree 0.0026, pedigree (1,4,1,1,1)
  properties: carbon content, non-fossil 0.194039, dry mass 0.346837 kg, water content 2882.2, wet mass 1000 kg
- water, deionised: 0.00366684 kg; lognormal variance with pedigree 0.1287, pedigree (5,5,5,3,4)
  properties: wet mass 1 kg
- wood chips, dry, measured as dry mass: -0.90191 kg; lognormal variance with pedigree 0.0026, pedigree (1,4,1,1,1)
  properties: carbon content, non-fossil 0.494, dry mass 1 kg, heating value, net 9.99 MJ, price 0.107 EUR2005, water content 0.15, wet mass 1.15 kg
- wooden board factory, organic bonded boards: 1.15e-10 unit; lognormal variance with pedigree 0.51, pedigree (5,5,5,5,5)

## Emissions to nature
- NMVOC, non-methane volatile organic compounds [air, unspecified]: 0.0229618 kg; lognormal variance with pedigree 0.042, pedigree (1,4,4,1,1)
- Water [air, unspecified]: 9.6824e-5 m3; lognormal variance with pedigree 0, pedigree (1,1,4,1,1)

## Sampling procedure
Data based on questionnaire from one manufacturing company, except for the infrastructure which is based on standard assumptions on plant lifetime and annual production volume.

## Extrapolations
Composition data for the colour and acrylic varnish were provided for 90% of the colour and 98.5% of the acrylic varnish total mass, these were then extrapolated, i.e. scaled-up, to the total mass.

## Review by Emilia Moreno Ruiz 2015-09-28
activity links added
