# process-specific burdens, hazardous waste incineration plant

Dataset: EcoSpold 2, unit process
Geography: RoW
Time period: 1997-01-01 to 2022-12-31
Technology level: current
Classification: ISIC rev.4 ecoinvent: 3822:Treatment and disposal of hazardous waste
Classification: EcoSpold01Categories: waste management/hazardous waste incineration
Synonyms: HWI; SAVA
Tags: ConvertedDataset
Scenario: Business-as-Usual
System model: Substitution, consequential, long-term
Share of production covered: 39 %
Generated by: Gabor Doka (obsolete)
Published in: Doka G. 2007
Database: ecoinvent
isCopyrightProtected: true
accessRestrictedTo: 1

## General comment
Constant for every kilogram of waste
[This dataset was already contained in the ecoinvent database version 2. It was not individually updated during the transfer to ecoinvent version 3. Life Cycle Impact Assessment results may still have changed, as they are affected by changes in the supply chain, i.e. in other datasets. This dataset was generated following the ecoinvent quality guidelines for version 2. It may have been subject to central changes described in the ecoinvent version 3 change report (http://www.ecoinvent.org/database/ecoinvent-version-3/reports-of-changes/), and the results of the central updates were reviewed extensively. The changes added e.g. consistent water flows and other information throughout the database. The documentation of this dataset can be found in the ecoinvent reports of version 2, which are still available via the ecoinvent website. The change report linked above covers all central changes that were made during the conversion process.]

## Included activities end
Burdens independent of the waste composition are inventoried. These depend on the manner the incineration is performend and not on the material. Includes burdens from DeNOx for abatement of thermal NOx.

## Geography
Based on technology encountered in Switzerland in 2000. Well applicable to modern incineration practices in Europe or North America or Japan.

## Technology
Swiss HWI plant in 2000 with wet flue gas scrubber and low-dust SCR DeNOx facility.

## Parameters
- fraction, process water, to air: 0.15 dimensionless; lognormal variance with pedigree 0.092025, pedigree (4,4,3,2,4)

## Reference product
- process-specific burdens, hazardous waste incineration plant: 1 kg; By-product classification allocatable product; CPC 39: Wastes or scraps
  production volume 3.96633 kg
  properties: carbon allocation 0 kg, carbon content 0, price 0.00355534 EUR2005

## Inputs from technosphere
- ammonia, anhydrous, liquid: 2.10697e-6, 1.03558e-5, 2.01026e-5, 0.000222825, 6.23733e-6, 9.41895e-6, 7.74351e-5, 2.05184e-5 kg (8 suppliers, which the file names only by identifier); sum of these 0.000369 kg; lognormal variance with pedigree 0.122, pedigree (1,1,5,5,1)
  properties: dry mass 1 kg, wet mass 1 kg
- chromium: 2.96e-7 kg; lognormal variance with pedigree 0.65, pedigree (5,5,5,5,5)
  properties: dry mass 1 kg, wet mass 1 kg
- heat, district or industrial, natural gas: 0.0172777, 0.0488561, 0.113866 MJ (3 suppliers, which the file names only by identifier); sum of these 0.18 MJ; lognormal variance with pedigree 0.37, pedigree (5,5,5,5,5)
  properties: heating value, net 1 MJ
- titanium dioxide: 1.45e-5 kg; lognormal variance with pedigree 0.65, pedigree (5,5,5,5,5)
  properties: dry mass 1 kg, wet mass 1 kg

## Inputs from nature
- Water, well, in ground [natural resource, in water]: 0.0043 m3; lognormal variance with pedigree 0.012, pedigree (1,4,5,5,3)

## Emissions to nature
- Ammonia [air, urban air close to ground]: 1e-5 kg; lognormal variance with pedigree 0.162, pedigree (1,1,5,5,1)
- Dioxins, measured as 2,3,7,8-tetrachlorodibenzo-p-dioxin [air, urban air close to ground]: 3e-12 kg; lognormal variance with pedigree 0.3912, pedigree (2,3,5,5,4)
- Nitrogen oxides [air, urban air close to ground]: 0.000181 kg; lognormal variance with pedigree 0.162, pedigree (1,1,5,5,1)
- Particulate Matter, < 2.5 um [air, urban air close to ground]: 3.97e-5 kg; lognormal variance with pedigree 0.332, pedigree (1,4,5,5,3)
- Particulate Matter, > 2.5 um and < 10um [air, urban air close to ground]: 1.99e-7 kg; lognormal variance with pedigree 0.142, pedigree (1,4,5,5,3)
- Water [air, unspecified]: 0.000645 m3; lognormal variance with pedigree 0.0427, pedigree (2,2,5,5,1)
- Water [water, unspecified]: 0.003655 m3; lognormal variance with pedigree 0.0427, pedigree (2,2,5,5,1)

## Sampling procedure
The 2 Swiss HWI plants, used as the inventory reference technology mix, have a total annual capacity of 53'000 tons of hazardous waste. This corresonds to 39% of the Swiss total installed capacity in 2000. Swiss average plants size is 20'000 t/a.

## Extrapolations
This dataset has been copied from an original dataset covering the geography CH. The uncertainty has been adjusted accordingly.

## Review by Niels Jungbluth 2003-07-07
Passed. Calculation for standard deviation 95 of infrastructure, land occupation, transport services and other services can differ from standard Pedigree approach used in this project and figures obtained by this procedure.
