# blasting

Dataset: EcoSpold 2, unit process
Geography: RoW
Time period: 1990-01-01 to 2022-12-31
Technology level: current
Classification: ISIC rev.4 ecoinvent: 4312:Site preparation
Classification: EcoSpold01Categories: construction processes/civil engineering
Synonyms: Tovex; blasting; agent
Tags: ConvertedDataset
Scenario: Business-as-Usual
System model: Substitution, consequential, long-term
Generated by: Daniel Kellenberger (obsolete)
Published in: Kellenberger D. 2007
Database: ecoinvent
isCopyrightProtected: true
accessRestrictedTo: 1

## General comment
All emissions are calculated based on the composition of the raw materials and completed by the report "Emissionsfaktoren für stationäre Quellen". No emissions of the blasted rock is included. This module should not be used if its relative importance would be high in a certain environmental inventory.
[This dataset was already contained in the ecoinvent database version 2. It was not individually updated during the transfer to ecoinvent version 3. Life Cycle Impact Assessment results may still have changed, as they are affected by changes in the supply chain, i.e. in other datasets. This dataset was generated following the ecoinvent quality guidelines for version 2. It may have been subject to central changes described in the ecoinvent version 3 change report (http://www.ecoinvent.org/database/ecoinvent-version-3/reports-of-changes/), and the results of the central updates were reviewed extensively. The changes added e.g. consistent water flows and other information throughout the database. The documentation of this dataset can be found in the ecoinvent reports of version 2, which are still available via the ecoinvent website. The change report linked above covers all central changes that were made during the conversion process.]

## Included activities end
Includes the raw material (explosive Tovex) and the emissions (calculated stoichiometric)

## Geography
The explosive Tovex is a CH-module and is used as proxy for RER

## Technology
Blasting of 100% Tovex

## Reference product
- blasting: 1 kg; By-product classification allocatable product; CPC 54320: Site formation and clearance services
  production volume 2.67763 kg
  properties: carbon allocation 0 kg, carbon content 0, price 0.964 EUR2005

## Inputs from technosphere
- explosive, tovex: 1 kg; lognormal variance with pedigree 0.24, pedigree (5,5,5,5,4)
  properties: carbon content, fossil 0.0483756, dry mass 0.92 kg, water content 0.0869565, wet mass 1 kg

## Emissions to nature
- Aluminium III [air, unspecified]: 0.151 kg; lognormal variance with pedigree 0.148, pedigree (4,5,5,5,1)
- Ammonia [air, unspecified]: 0.059 kg; lognormal variance with pedigree 0.148, pedigree (4,5,5,5,1)
- Carbon monoxide, fossil [air, unspecified]: 0.077 kg; lognormal variance with pedigree 0.108, pedigree (4,5,5,5,1)
- NMVOC, non-methane volatile organic compounds [air, unspecified]: 0.06 kg; lognormal variance with pedigree 0.2826, pedigree (2,5,5,5,5)
- Nitrogen oxides [air, unspecified]: 0.331 kg; lognormal variance with pedigree 0.108, pedigree (4,5,5,5,1)
- Particulate Matter, < 2.5 um [air, unspecified]: 0.0054 kg; lognormal variance with pedigree 0.5426, pedigree (2,5,5,5,5)
- Particulate Matter, > 10 um [air, unspecified]: 0.0003 kg; lognormal variance with pedigree 0.2826, pedigree (2,5,5,5,5)
- Particulate Matter, > 2.5 um and < 10um [air, unspecified]: 0.0003 kg; lognormal variance with pedigree 0.3626, pedigree (2,5,5,5,5)

## Sampling procedure
Emissions are based on stochiometric calculations and all other In- and Output modules are estimations

## Extrapolations
See geography This dataset has been copied from an original dataset covering the geography RER. The uncertainty has been adjusted accordingly.

## Review by Roberto Dones 2003-07-23
passed
