# long liner construction, steel

Dataset: EcoSpold 2, unit process
Geography: RoW
Time period: 2009-01-01 to 2022-12-31
Technology level: current
Classification: ISIC rev.4 ecoinvent: 0311:Marine fishing
Scenario: Business-as-Usual
System model: Substitution, consequential, long-term
Generated by: Avraam Symeonidis
Published in: Vázquez-Rowe, I. 2011
Database: ecoinvent
isCopyrightProtected: true
accessRestrictedTo: 1

## General comment
This dataset represents the construction of long liners, per 1000 kg of light ship weight (LSW), Vessel dimensions: 28 - 38 m length.
System boundaries and relation between activities

## Included activities start
Construction of vessels, including provision of all materials and work

## Included activities end
Batteries are excluded, as they do not exist in the database. Gear materials were not included, considering that their relevance in weight is insignificant in long lining vessels as compared to trawlers or other net fisheries.

## Geography
Global average based on data from Spain.

## Reference product
- long liner, steel: 1 kg; By-product classification allocatable product; CPC 49315: Fishing vessels; factory ships and other vessels for processing or preserving fishery products
  production volume 0.708041 kg
  properties: carbon allocation 0 kg, carbon content 0, price 0.513399 EUR2005

## Inputs from technosphere
- alkyd paint, white, without solvent, in 60% solution state: 0.00630563 kg; triangular min 0.00542, mostLikely 0.00648275, max 0.00701412, pedigree (2,5,5,5,2)
  properties: carbon content, fossil 0.140367, carbon content, non-fossil 0.199629, dry mass 1 kg, heating value, net 10.3 MJ, wet mass 1 kg
- copper, cathode: 0.00983058 kg
  properties: dry mass 1 kg, wet mass 1 kg
- marine electric motor: 6.36765e-6 unit; triangular min 5.23602e-6, mostLikely 6.55566e-6, max 7.31127e-6, pedigree (2,5,5,5,2)
  properties: lifetime 10 year, lifetime capacity [h] 20000 hour
- marine engine: 3.30787e-5 unit
  properties: lifetime 15 year, lifetime capacity [h] 8000 hour
- metal working, average for steel product manufacturing: 0.00891057 kg
- reinforcing steel: 0.00891057 kg
  properties: carbon content, fossil 0.004, dry mass 1 kg, wet mass 1 kg
- steel, low-alloyed, hot rolled: 0.935507 kg; triangular min 0.900561, mostLikely 0.948786, max 0.957173, pedigree (2,3,5,5,1)
  properties: carbon content, fossil 0.005, dry mass 1 kg, wet mass 1 kg
- used long liner, steel: -1 kg
- wire drawing, copper: 0.00983058 kg; triangular min 0.00927545, mostLikely 0.0100238, max 0.0101925, pedigree (2,3,5,5,2)

## Sampling procedure
A sample of 12 vessels of a population of 49 was modelled based on European geography.

## Extrapolations
Valid for other long lining fisheries with vessel sizes ranging from 25-40 m. The activity is extrapolated from the respective European activity. Uncertainty has been adjusted accordingly.
