# coating powder production

Dataset: EcoSpold 2, unit process
Geography: RoW
Time period: 1996-01-01 to 2022-12-31
Technology level: current
Classification: ISIC rev.4 ecoinvent: 2022:Manufacture of paints, varnishes and similar coatings, printing ink and mas
Classification: EcoSpold01Categories: metals/processing
Tags: ConvertedDataset
Scenario: Business-as-Usual
System model: Substitution, consequential, long-term
Generated by: Hans-Jörg Althaus
Published in: Althaus H.-J. 2004
Database: ecoinvent
isCopyrightProtected: true
accessRestrictedTo: 1

## General comment
A 1:1 mixture of epoxy and polyester resin is assumed. Powders of this composition are mainly used for exterior architectural applications. The pigment inventoried is TiO2. Other pigments (and thus other colours) could have very different ecoprofiles. Since many different powders are available on the market, the representation of a specific powder can be poor.
[This dataset was already contained in the ecoinvent database version 2. It was not individually updated during the transfer to ecoinvent version 3. Life Cycle Impact Assessment results may still have changed, as they are affected by changes in the supply chain, i.e. in other datasets. This dataset was generated following the ecoinvent quality guidelines for version 2. It may have been subject to central changes described in the ecoinvent version 3 change report (http://www.ecoinvent.org/database/ecoinvent-version-3/reports-of-changes/), and the results of the central updates were reviewed extensively. The changes added e.g. consistent water flows and other information throughout the database. The documentation of this dataset can be found in the ecoinvent reports of version 2, which are still available via the ecoinvent website. The change report linked above covers all central changes that were made during the conversion process.]

## Included activities end
Powder fabrication and packing in buckets. The functional unit refers to 1 kg of powder. For transports the buckets (0.0133 kg/kg powder) have to be taken into account separately

## Geography
Swiss waste treatment assumed

## Technology
Extrusion and grinding. This technology is commonly used with thermosetting powders.

## Reference product
- coating powder: 1 kg; By-product classification allocatable product; CPC 35110: Paints and varnishes and related products
  production volume 2.67763 kg
  properties: carbon allocation 0.339435 kg, carbon content 0.339435, carbon content, fossil 0.339435, carbon content, non-fossil 0, dry mass 1 kg, heating value, net 10.28 MJ, price 39.5419 EUR2005, water content 0, water in wet mass 0 kg, wet mass 1 kg

## Inputs from technosphere
- chemical factory, organics: 4e-10 unit; lognormal variance with pedigree 0.46, pedigree (5,5,5,5,5)
- chemical, organic: 0.0697 kg; lognormal variance with pedigree 0.0146, pedigree (3,3,5,5,1)
  properties: carbon content, fossil 0.628, dry mass 1 kg, heating value, net 19.03 MJ, wet mass 1 kg
- electricity, medium voltage: 0.174396, 0.00652504, 0.0829029, 1.43888, 0.120819, 0.00647585 kWh (6 suppliers, which the file names only by identifier); sum of these 1.83 kWh; lognormal variance with pedigree 0.0326, pedigree (3,3,5,5,3)
- epoxy resin, liquid: 0.293 kg; lognormal variance with pedigree 0.0146, pedigree (3,3,5,5,1)
  properties: carbon content, fossil 0.42325, dry mass 1 kg, heating value, net 12.82 MJ, wet mass 1 kg
- extrusion, plastic pipes: 1.02 kg; lognormal variance with pedigree 0.0326, pedigree (3,3,5,5,3)
- polyester resin, unsaturated: 0.293 kg; lognormal variance with pedigree 0.0146, pedigree (3,3,5,5,1)
  properties: carbon content, fossil 0.58584, dry mass 1 kg, heating value, net 17.75 MJ, wet mass 1 kg
- polyethylene, low density, granulate: 0.0133 kg; lognormal variance with pedigree 0.0326, pedigree (3,3,5,5,3)
  properties: carbon content, fossil 0.857143, dry mass 1 kg, heating value, net 42.47 MJ, wet mass 1 kg
- titanium dioxide: 0.354 kg; lognormal variance with pedigree 0.0146, pedigree (3,3,5,5,1)
  properties: dry mass 1 kg, wet mass 1 kg
- waste emulsion paint: -0.01 kg; lognormal variance with pedigree 0.38, pedigree (5,5,5,5,5)
  properties: carbon content, fossil 0.27, dry mass 1 kg, heating value, net 8.18 MJ, wet mass 1 kg

## Emissions to nature
- NMVOC, non-methane volatile organic compounds [air, unspecified]: 0.0001 kg; lognormal variance with pedigree 0.5, pedigree (5,5,5,5,5)

## Sampling procedure
Literature

## Extrapolations
None This dataset has been copied from an original dataset covering the geography RER. The uncertainty has been adjusted accordingly.

## Review by Roland Hischier 2004-04-01
passed.
