# fibre cement facing tile production

Dataset: EcoSpold 2, unit process
Geography: RoW
Time period: 2007-01-01 to 2022-12-31
Technology level: current
Classification: EcoSpold01Categories: construction materials/coverings
Classification: ISIC rev.4 ecoinvent: 2395:Manufacture of articles of concrete, cement and plaster
Tags: ConvertedDataset
Scenario: Business-as-Usual
System model: Substitution, consequential, long-term
Generated by: Hans-Jörg Althaus
Published in: Hischier, R. 2009
Database: ecoinvent
isCopyrightProtected: true
accessRestrictedTo: 1

## General comment
Swiss consumption mix
[This dataset was already contained in the ecoinvent database version 2. It was not individually updated during the transfer to ecoinvent version 3. Life Cycle Impact Assessment results may still have changed, as they are affected by changes in the supply chain, i.e. in other datasets. This dataset was generated following the ecoinvent quality guidelines for version 2. It may have been subject to central changes described in the ecoinvent version 3 change report (http://www.ecoinvent.org/database/ecoinvent-version-3/reports-of-changes/), and the results of the central updates were reviewed extensively. The changes added e.g. consistent water flows and other information throughout the database. The documentation of this dataset can be found in the ecoinvent reports of version 2, which are still available via the ecoinvent website. The change report linked above covers all central changes that were made during the conversion process.]

## Included activities end
Establishes a mix of small and large fibre cement facing tiles produced by Eternit Switzerland according to the Swiss consumption mix.

## Geography
Production in Switzerland for World wide market

## Technology
Raw tile production, drying, coating

## Reference product
- fibre cement facing tile: 1 kg; By-product classification allocatable product; CPC 37540: Tiles, flagstones, bricks and similar articles, of cement, concrete or artificial stone
  production volume 3.96633 kg
  properties: carbon allocation 0.0316818 kg, carbon content 0.0316818, carbon content, fossil 0.0201818, carbon content, non-fossil 0.0115, dry mass 1 kg, heating value, net 0 MJ, price 0.501 EUR2005, water content 0, water in wet mass 0 kg, wet mass 1 kg

## Inputs from technosphere
- fibre cement facing tile, large format: 0.7 kg; lognormal variance with pedigree 0.002, pedigree (1,1,5,5,1)
  properties: carbon content, fossil 0.0201818, carbon content, non-fossil 0.0115, dry mass 1 kg, wet mass 1 kg
- fibre cement facing tile, small format: 0.3 kg; lognormal variance with pedigree 0.002, pedigree (1,1,5,5,1)
  properties: carbon content, fossil 0.0201818, carbon content, non-fossil 0.0115, dry mass 1 kg, wet mass 1 kg

## Sampling procedure
Measurement in plant (1 year)

## Extrapolations
none This dataset has been copied from an original dataset covering the geography CH. The uncertainty has been adjusted accordingly.

## Review by Roland Hischier 2009-02-06
to be validated
self-validated by hja for test calcualtion

## Review by Emilia Moreno Ruiz 2018-04-11
Links added to specific suppliers
