# concrete production, 30MPa, exposure classes XC3/XD2/XF1/XA1, with cement, unspecified

Dataset: EcoSpold 2, unit process
Geography: AT
Time period: 2015-10-25 to 2022-10-25
Technology level: current
Classification: ISIC rev.4 ecoinvent: 2395:Manufacture of articles of concrete, cement and plaster
Classification: EcoSpold01Categories: construction materials/concrete
Synonyms: ready-mix concrete; ready mixed concrete
Tags: combined production
Scenario: Business-as-Usual
System model: Substitution, consequential, long-term
Share of production covered: 18.36 %
Generated by: Alexander Passer
Published in: Passer, A 2020
Database: ecoinvent
isCopyrightProtected: true
accessRestrictedTo: 1

## General comment
This dataset represents the production of ready-mix concrete in Austria, with 30MPa compressive strength at 28 days, exposure classes XC3/XD2/XF1/XA1, also abbreviated as B2 according to Austrian standards. Ingredients for 1m3 of fresh concrete are: Cement 282 kg, Water 171 kg, Sand 874 kg, Gravel 1041 kg, chemical admixtures 1.81 kg, supplementary cementitious materials (SCM) 52 kg. The SCM content refers to AHWZ = aufbereitete hydraulisch wirksame Zusatzstoffe: which are processed hydraulic additions for concrete production, consisting of specially processed fly-ash with slag and limestone powder, according to Austrian standard ÖNORM B 3309. 30 MPa concrete is intended for building structures in general, exposed to freeze-thaw, including residential, commercial and industrial uses. Concrete types B are abbreviations used in Austrian practice to refer to a set of exposure conditions. B2, specifically, refers to exposure classes XC3, XD2, XF1 and XA1. According to the european standard EN 206-1, XC exposure classes refer to the risk of "corrosion induced by carbonation", XD to "corrosion induced by chlorides other than from sea water", XF to "freeze/thaw attack with or without de-icing agents" and XA to "chemical attack" (see Table 1 excerpt below). The XC3 class represents, more specifically, a concrete in an environment with moderate humidity, such as concrete inside buildings with moderate or high air humidity, or external concrete sheltered from rain. The XD2 class represents a concrete exposed to a wet or rarely dry environment, such as concrete in swimming pools or exposed to industrial waters containing chlorides.The XF1 class represents concretes exposed to a moderate water saturation, without de-icing agent; such as vertical concrete surfaces exposed to rain and freezing. Last, XA1 represents concrete exposed to a slightly aggressive chemical environment. For more information on the exposure classes we advise the user to refer to the European standard EN 2016-1. The concrete mix documented here is an average of seven concrete manufacturers which, together, represent approximately 90% of ready-mix concrete production in Austria. Exchange properties are declared for the fresh concrete. Concrete dry mass considers the amount of water that reacts with cement to form hydrates. As a consequence, this dataset is not water balanced according to ecoinvent guidelines. The waste generated in production has been accounted for, and the amount of additional inputs was proportionately split up between concrete ingredients, except for inputs of auxiliary materials, such as lubricating oil and rubber. The annual production volume and proportion per strength class data was provided by the Austrian Association for ready mix concrete manufacturers for the year 2018. Distribution by ready-mix exposure classes in Austria is: XC1-19.7%; XC2-23.6%; B1-10.3%; B2-21.5%. Other exposure classes represent, together, 24.9% and we're not modelled here due to their inexpressive individual consumption.

## Included activities start
From reception of raw materials at the ready-mix plant gate.

## Included activities end
This activity ends before the delivery of concrete at the construction site.
The dataset includes the whole manufacturing processes to produce ready-mixed concrete, internal processes (material handling and mixing) and infrastructure.

## Geography
Austrian data. For some exchanges GLO values have been used as proxy. Data quality indicators adjusted accordingly.

## Technology
Typical technology for average ready mix concrete production in Austria

## Time period
Mix designs provided referred to 2015, while annual production volumes refer to 2018.

## Parameters
- losses: 0.015 dimensionless
  Measured value. Loss percentage documented by manufacturer with highest production volume

## Reference product
- concrete, 30MPa: 1 m3; By-product classification allocatable product; CPC 37510: Non-refractory mortars and concretes
  production volume 1.806e6 m3
  properties: carbon allocation 0 kg, carbon content 0, cement content 282.156 kg, dry mass 2315.66 kg, gravel content 1041.16 kg, price 185 EUR2005, sand content 873.64 kg, water content 0.0457753, water in wet mass 106 kg, wet mass 2421.66 kg

## Inputs from technosphere
- cement, unspecified: 286.388 kg; lognormal variance with pedigree 0.004641, pedigree (1,1,3,1,1)
  properties: dry mass 1 kg, wet mass 1 kg
- chemical, organic: 1.83793 kg; lognormal variance with pedigree 0.0601, pedigree (1,1,3,1,1)
  properties: bulk density 1140 kg/m3, dry mass 1 kg, heating value, net 19.03 MJ, wet mass 1 kg
- concrete mixing factory: 4.57e-7 unit; lognormal variance with pedigree 0.3308, pedigree (2,5,3,5,1)
- diesel, burned in building machine: 22.7 MJ; lognormal variance with pedigree 0.0015, pedigree (2,2,3,1,1)
  properties: density 0.84 kg/l, heating value, net 1 MJ
- electricity, medium voltage: 2.8 kWh; lognormal variance with pedigree 0.0018, pedigree (2,3,2,1,1)
- gravel, crushed: 1056.78 kg; lognormal variance with pedigree 0.005119, pedigree (1,2,3,1,1)
  properties: dry mass 1 kg, wet mass 1 kg
- ground granulated blast furnace slag: 23.7513 kg; lognormal variance with pedigree 0.1868, pedigree (1,1,3,1,1)
  properties: dry mass 1 kg, wet mass 1 kg
- limestone, crushed, for mill: 5.27807 kg; lognormal variance with pedigree 0.1868, pedigree (1,1,3,1,1)
  properties: carbon content, fossil 0.117492, dry mass 0.998 kg, water content 0.00200401, wet mass 1 kg
- lubricating oil: 0.03143 kg; lognormal variance with pedigree 0.0015, pedigree (2,2,3,1,1)
  properties: dry mass 1 kg, heating value, net 40.2 MJ, wet mass 1 kg
- sand: 886.745 kg; lognormal variance with pedigree 0.01386, pedigree (1,2,3,1,1)
  properties: dry mass 1 kg, wet mass 1 kg
- scrap steel: -0.0585 kg; lognormal variance with pedigree 0.0015, pedigree (2,2,2,1,1)
  properties: dry mass 1 kg, wet mass 1 kg
- steel, low-alloyed, hot rolled: 0.0585 kg; lognormal variance with pedigree 0.0015, pedigree (2,2,3,1,1)
  properties: dry mass 1 kg, wet mass 1 kg
- synthetic rubber: 0.07381 kg; lognormal variance with pedigree 0.0015, pedigree (2,2,3,1,1)
  properties: dry mass 1 kg, heating value, net 26.42 MJ, wet mass 1 kg
- tap water: 173.457 kg; lognormal variance with pedigree 0.00141, pedigree (1,2,3,1,1)
  properties: wet mass 1 kg
- waste concrete: -36.3249 kg; lognormal variance with pedigree 0.0015, pedigree (2,2,2,1,1)
  properties: dry mass 0.9461 kg, water content 0.0569707, wet mass 1 kg
- waste mineral oil: -0.03143 kg; lognormal variance with pedigree 0.0015, pedigree (2,2,2,1,1)
  properties: carbon content, fossil 0.864444, dry mass 0.9 kg, heating value, net 34.7 MJ, water content 0.111111, wet mass 1 kg
- waste rubber, unspecified: -0.07381 kg; lognormal variance with pedigree 0.0015, pedigree (2,2,2,1,1)
  properties: carbon content, fossil 0.853, dry mass 1 kg, heating value, net 27.19 MJ, wet mass 1 kg
- wastewater from concrete production: -0.0016 m3; lognormal variance with pedigree 0.0015, pedigree (2,2,2,1,1)
  properties: carbon content, fossil 0.027074, dry mass 0.449139 kg, water content 2225.48, wet mass 1000 kg

## Inputs from nature
- Water, cooling, unspecified natural origin [natural resource, in water]: 0.0016 m3; lognormal variance with pedigree 0.0015, pedigree (2,2,3,1,1)

## Sampling procedure
Data on concrete mixes are a weighted average of seven concrete manufacturers in Austria. For other auxiliary flows, data was taken from the largest concrete manufacturer in Austria. Basic uncertainty was calculated from the coefficient of variation of the sample. No conversion to the geometric mean of the lognormal distribution was done, for consistency reasons with other ecoinvent datasets.
Representativeness is of 18.36% based on the annual production volumes of B2 concrete provided by the seven concrete manufacturers against the annual production volume of B2 concrete for the country provided by the Austrian association of ready-mix concrete manufacturers

## Extrapolations
Auxiliary process flows (steel, lubricating oil, rubber, etc) for the largest manufacturer were used to represent total concrete production in the country. The infrastructure-related flow "concrete mixing factory" has been kept as in the dataset "concrete production, 25 MPa, RNA only, GLO, 2006-2006". In both cases uncertainties were adjusted accordingly.
