# transport, freight, lorry with refrigeration machine, 3.5-7.5 ton, EURO3, carbon dioxide, liquid refrigerant, freezing

Dataset: EcoSpold 2, unit process
Geography: GLO
Time period: 2010-01-01 to 2022-12-31
Technology level: current
Classification: ISIC rev.4 ecoinvent: 4923:Freight transport by road
Synonyms: refrigerated transport; controlled atmosphere transport
Scenario: Business-as-Usual
System model: Substitution, consequential, long-term
Generated by: Tereza Levova
Published in: Keller, M. 2010
Database: ecoinvent
isCopyrightProtected: true
accessRestrictedTo: 1

## General comment
This dataset represents transport of goods in lorry with atmosphere controlled (temperature, humidity, etc.) storage space set up for freezing.
While the majority of the atmosphere controlled (cold chain, refrigerated transport) road transportation is conducted with truck with semi-trailer in the cities this goods is often transported by smaller rigid trucks with refrigeration machine.

## Included activities start
This activity starts with input of fuel, road and vehicle infrastructure including refrigeration machine. It includes also exhaust and non-exhaust emissions.

## Included activities end
This datasets combines the transport of 1 ton of goods over 1km by a lorry with refrigeration machine. The goods themselves are not included.

## Technology
The construction of the refrigeration machine does not change very much in time. What might be changing is the 1) type of refrigerant, 2) energy consumption - efficiency and 3) leakage of the refrigerant.
The datasets on transport, freight, lorry with refrigeration machine present in the ecoinvent database represent several scenarios with different type of refrigerant, energy consumption and leakage of the refrigerant.
The technology level is set reflecting the EURO classification, i.e. EURO3 is the oldest technology and EURO6 the newest. The R134a refrigerant is currently most widely used refrigerant, while the carbon dioxide, liquid is the newer more “environmentally friendly” solution. Therefore all the lorries using the carbon dioxide, liquid as refrigerant have higher level of technology than those using the R134a as refrigerant.

## Parameters
- average annual refrigerant leakage rate: 0.25 dimensionless; name refrigerant_leakage_rate; lognormal variance with pedigree 0.0166, pedigree (4,5,1,1,1)
  Estimated based on literature value.
  The literature suggest, that the annual leakage rate of the refrigerant is between 10% - 37% (Tassou, 2008, Food transport refrigeration - Approaches to reduce energy consumption and environmental impacts of road transport) and 20% (IPCC, 2005, Special Report: Safeguarding the Ozone Layer and the Global Climate System). The IPCC report also says, that the efficiency of the new systems is higher and the rate of the leakage is lower.
  The annual refrigerant leakage rate is expressed as a percentage of the total refrigerant tank volume. Older the car more leakage. The newest technology - EURO6 class of lorries - has estimated leakage of 10%. The estimated leakage for the other classes is;
  25% EURO3
  19.3% EURO4
  13.7% EURO5
  8% EURO6
- fraction, refrigeration energy to motive energy: 0.2 dimensionless; name fraction_refEnergy_motEnergy; lognormal variance with pedigree 0.0166, pedigree (4,5,1,1,1)
  Literature value (Tassou, S.A., 2008, Food transport refrigeration - Approaches to reduce energy consumption and environmental impacts of road transport, Applied Thermal Engineering).
  Literature (Tassou, S.A., 2008) states, that irrespective of the type of vehicle type the average fuel consumption of the refrigeration systems in the sample varied between 15% and 25% of the engine fuel consumption. The data did not distinguish between chilled, frozen or mixed temperature product transportation in multi-compartment vehicles or distribution type.
  It is decided, based on expert judgement, that in both operation modes - cooling and freezing - the power consumption is the same - 20%. In case of reefers (see 'operation, reefer ...' activity) there is an extensive discussion whether the power consumption of freezing is actually lower or higher than in case of cooling. It has been decided, that in case of reefers the freezing operation mode has slightly lower energy consumption than cooling. The difference between reefers and lorries which provide transport of goods in need of atmosphere control is the human behaviour. Reefers are usually loaded only once and unloaded only once. The reefer is not being opened during its transport. It is assumed, that in case of lorries the storage is opened and closed regularly resulting in higher heat loss and consequently energy consumption.
  This parametre should be updated once better data on energy consumption are available.
  It is assumed, that the refrigeration machine energy efficiency is increasing in the same rate as the energy efficiency of the lorries, thus this fraction is the same for all the EURO classes.
- initial refrigerant charge: 4.5 kg; name initial_refrigerant_charge; lognormal variance with pedigree 0.0166, pedigree (4,5,1,1,1)
  Literature value. Copied from the refrigerated machine production dataset.

## Reference product
- transport, freight, lorry with refrigeration machine, 3.5-7.5 ton, EURO3, carbon dioxide, liquid refrigerant, freezing: 1 metric ton*km; By-product classification allocatable product; CPC 65111: Road transport services of freight by refrigerator vehicles
  production volume 1.07301e9 metric ton*km
  properties: carbon allocation 0 kg, carbon content 0, price 0.119082 EUR2005

## Inputs from technosphere
- brake wear emissions, lorry: -4.13469e-5 kg; lognormal variance with pedigree 0.0021, pedigree (2,2,2,4,1)
  properties: carbon content, fossil 0.149
- carbon dioxide, liquid: 5.43428e-6, 2.58157e-5 kg (2 suppliers, which the file names only by identifier); sum of these 3.125e-5 kg; lognormal variance with pedigree 0.0166, pedigree (4,5,4,1,1)
  properties: carbon content, fossil 0.272727, dry mass 1 kg, heating value, net 8.27 MJ, wet mass 1 kg
- diesel, low-sulfur: 0.133404 kg; lognormal variance with pedigree 0.0021, pedigree (2,2,5,4,1)
  properties: carbon content, fossil 0.865, dry mass 1 kg, heating value, net 42.8 MJ, wet mass 1 kg
- lorry with refrigeration machine, carbon dioxide, liquid as refrigerant, 16 metric ton: 1.88e-6 unit; lognormal variance with pedigree 0.304, pedigree (3,1,4,5,1)
  properties: lifetime 15 year, lifetime capacity [metric ton*km] 540000 metric ton*km
- maintenance, lorry 16 metric ton: 1.26917e-6, 6.10831e-7 unit (2 suppliers, which the file names only by identifier); sum of these 1.88e-6 unit; lognormal variance with pedigree 0.304, pedigree (3,1,4,5,1)
- road: 0.00195 m*year; lognormal variance with pedigree 0.304, pedigree (3,1,4,5,1)
- road maintenance: 0.00128332, 2.97178e-5 m*year (2 suppliers, which the file names only by identifier); sum of these 0.00131304 m*year; lognormal variance with pedigree 0.304, pedigree (3,1,4,5,1)
- road wear emissions, lorry: -3.56e-5 kg; lognormal variance with pedigree 0.0021, pedigree (2,2,2,4,1)
  properties: carbon content, fossil 0.75
- tyre wear emissions, lorry: -0.000409654 kg; lognormal variance with pedigree 0.0021, pedigree (2,2,2,4,1)
  properties: carbon content, fossil 0.675

## Emissions to nature
- Acetaldehyde [air, unspecified]: 5.10676e-6 kg; lognormal variance with pedigree 0.0021, pedigree (2,2,5,4,1)
- Acrolein [air, unspecified]: 1.97789e-6 kg; lognormal variance with pedigree 0.0021, pedigree (2,2,5,4,1)
- Ammonia [air, unspecified]: 3.66022e-6 kg; lognormal variance with pedigree 0.0021, pedigree (2,2,5,4,1)
- Arsenic ion [air, unspecified]: 1.33404e-11 kg; lognormal variance with pedigree 0.0021, pedigree (2,2,5,4,1)
- Benzaldehyde [air, unspecified]: 1.53091e-6 kg; lognormal variance with pedigree 0.0021, pedigree (2,2,5,4,1)
- Benzene [air, unspecified]: 7.82216e-8 kg; lognormal variance with pedigree 0.0021, pedigree (2,2,5,4,1)
- Butane [air, unspecified]: 1.67617e-7 kg; lognormal variance with pedigree 0.0021, pedigree (2,2,5,4,1)
- Cadmium II [air, unspecified]: 1.16061e-9 kg; lognormal variance with pedigree 0.7015, pedigree (2,2,5,4,1)
- Carbon dioxide, fossil [air, unspecified]: 0.423705 kg; lognormal variance with pedigree 0.0021, pedigree (2,2,5,4,1)
- Carbon monoxide, fossil [air, unspecified]: 0.000612953 kg; lognormal variance with pedigree 0.0021, pedigree (2,2,5,4,1)
- Chromium III [air, unspecified]: 4.00211e-9 kg; lognormal variance with pedigree 0.7015, pedigree (2,2,5,4,1)
- Chromium VI [air, unspecified]: 8.00423e-12 kg; lognormal variance with pedigree 0.7015, pedigree (2,2,5,4,1)
- Copper ion [air, unspecified]: 2.82816e-9 kg; lognormal variance with pedigree 0.7015, pedigree (2,2,5,4,1)
- Dinitrogen monoxide [air, unspecified]: 2.67144e-6 kg; lognormal variance with pedigree 0.0021, pedigree (2,2,5,4,1)
- Ethane [air, unspecified]: 3.35236e-8 kg; lognormal variance with pedigree 0.0021, pedigree (2,2,5,4,1)
- Formaldehyde [air, unspecified]: 9.38659e-6 kg; lognormal variance with pedigree 0.0021, pedigree (2,2,5,4,1)
- Heptane [air, unspecified]: 3.35236e-7 kg; lognormal variance with pedigree 0.0021, pedigree (2,2,5,4,1)
- Lead II [air, unspecified]: 6.95034e-9 kg; lognormal variance with pedigree 0.7015, pedigree (2,2,5,4,1)
- Mercury II [air, unspecified]: 7.0704e-10 kg; lognormal variance with pedigree 0.7015, pedigree (2,2,5,4,1)
- Methane, fossil [air, unspecified]: 2.74783e-6 kg; lognormal variance with pedigree 0.0021, pedigree (2,2,5,4,1)
- NMVOC, non-methane volatile organic compounds [air, unspecified]: 9.07706e-5 kg; lognormal variance with pedigree 0.0021, pedigree (2,2,5,4,1)
- Nickel II [air, unspecified]: 1.17395e-9 kg; lognormal variance with pedigree 0.7015, pedigree (2,2,5,4,1)
- Nitrogen oxides [air, unspecified]: 0.00301174 kg; lognormal variance with pedigree 0.0021, pedigree (2,2,5,4,1)
- PAH, polycyclic aromatic hydrocarbons [air, unspecified]: 1.04322e-8 kg; lognormal variance with pedigree 0.7015, pedigree (2,2,5,4,1)
- Particulate Matter, < 2.5 um [air, unspecified]: 5.71462e-5 kg; lognormal variance with pedigree 0.0021, pedigree (2,2,5,4,1)
- Pentane [air, unspecified]: 6.70471e-8 kg; lognormal variance with pedigree 0.0021, pedigree (2,2,5,4,1)
- Propane [air, unspecified]: 1.11745e-7 kg; lognormal variance with pedigree 0.0021, pedigree (2,2,5,4,1)
- Selenium IV [air, unspecified]: 1.33404e-11 kg; lognormal variance with pedigree 0.7015, pedigree (2,2,5,4,1)
- Styrene [air, unspecified]: 6.25772e-7 kg; lognormal variance with pedigree 0.0021, pedigree (2,2,5,4,1)
- Sulfur dioxide [air, unspecified]: 2.13038e-6 kg; lognormal variance with pedigree 0.0021, pedigree (2,2,5,4,1)
- Toluene [air, unspecified]: 1.11745e-8 kg; lognormal variance with pedigree 0.0021, pedigree (2,2,5,4,1)
- Zinc II [air, unspecified]: 2.31856e-7 kg; lognormal variance with pedigree 0.7015, pedigree (2,2,5,4,1)
- m-Xylene [air, unspecified]: 1.0951e-6 kg; lognormal variance with pedigree 0.0021, pedigree (2,2,5,4,1)
- o-Xylene [air, unspecified]: 4.46981e-7 kg; lognormal variance with pedigree 0.0021, pedigree (2,2,5,4,1)
