# tree seedling production, in unheated greenhouse

Dataset: EcoSpold 2, unit process
Geography: RER
Time period: 2002-01-01 to 2022-12-31
Technology level: current
Classification: ISIC rev.4 ecoinvent: 0130:Plant propagation
Tags: Swiss brush-up completed
Scenario: Business-as-Usual
System model: Substitution, consequential, long-term
Generated by: Frank Werner
Database: ecoinvent
isCopyrightProtected: true
accessRestrictedTo: 1

## General comment
The dataset refers to the production of 1000 tree seedlings. The dataset contains the production of tree seedlings in a tree nursery for plantation in forests. The seedlings are produced in an unheated greenhouse and packed for transport.
The seedlings go with a packaging of 1.05 kg of growing dras (HDPE), 3.65 kg of plant boxes from cardboard and 0.0525 kg of strech wrap (LLDPE), to be recycled or disposed of after planting

## Included activities start
The activity starts with the establishment of the greenhouse with HDPE film and considers soil improvement, fertilization, transport of inputs and transport packaging materials.The dataset also contains the disposal of the transport packaging (after plantation of the seedling).

## Included activities end
The activity ends with the seedlings packed for transportation. The dataset does not contain data on water use, frame infrastructure of the greenhouse and on the use of fungicides, insecticides etc. as source does not provide this information.

## Reference product
- tree seedling, for planting: 1 unit; By-product classification allocatable product; CPC 01961: Live plants; bulbs, tubers and roots; cuttings and slips; mushroom spawn
  production volume 1e12 unit
  properties: carbon allocation 0.0988 kg, carbon content 0.494, carbon content, non-fossil 0.494, dry mass 0.2 kg, price 0.0627493 EUR2005, water content 0.5, water in wet mass 0.1 kg, wet mass 0.3 kg

## Inputs from technosphere
- compost: 1.5 kg
  properties: UVEK_link_1 527, UVEK_relative_amount_1 1, carbon content, non-fossil 0.183645, copper content 5.77e-5, dry mass 0.5 kg, lead content 4.9e-5, nitrogen content 0.014, phosphorus content 0.0035, potassium content 0.01, water content 1, wet mass 1 kg, zinc content 0.000184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
- diesel, burned in building machine: 0.0184 MJ; lognormal variance with pedigree 0.235, pedigree (5,5,5,5,5)
  properties: UVEK_link_1 732, UVEK_relative_amount_1 1, heating value, net 1 MJ
- electricity, medium voltage: 0.0704 kWh; lognormal variance with pedigree 0.235, pedigree (5,5,5,5,5)
  properties: UVEK_link_1 1779, UVEK_relative_amount_1 1
- extrusion, plastic film: 0.00116 kg; lognormal variance with pedigree 0.235, pedigree (5,5,5,5,5)
  properties: UVEK_link_1 2107, UVEK_relative_amount_1 1
- heat, central or small-scale, other than natural gas: 0.0027 MJ; lognormal variance with pedigree 0.235, pedigree (5,5,5,5,5)
  properties: UVEK_link_1 2554, UVEK_relative_amount_1 1, heating value, net 1 MJ
- inorganic nitrogen fertiliser, as N: 0.000609 kg; lognormal variance with pedigree 0.235, pedigree (5,5,5,5,5)
  properties: UVEK_link_1 174, UVEK_relative_amount_1 1, dry mass 1 kg, wet mass 1 kg
- packaging film, low density polyethylene: 0.0001655 kg; lognormal variance with pedigree 0.235, pedigree (5,5,5,5,5)
  properties: UVEK_link_1 3323, UVEK_relative_amount_1 1, carbon content, fossil 0.857143, dry mass 1 kg, heating value, net 42.47 MJ, wet mass 1 kg
- polyethylene, high density, granulate: 0.00116 kg; lognormal variance with pedigree 0.235, pedigree (5,5,5,5,5)
  properties: UVEK_link_1 3540, UVEK_relative_amount_1 1, carbon content, fossil 0.857143, dry mass 1 kg, heating value, net 42.47 MJ, wet mass 1 kg
- polystyrene, extruded: 4.5e-5 kg; lognormal variance with pedigree 0.235, pedigree (5,5,5,5,5)
  properties: UVEK_link_1 3555, UVEK_relative_amount_1 1, carbon content, fossil 0.873427, dry mass 1 kg, heating value, net 38.67 MJ, wet mass 1 kg
- waste polyethylene: -0.0013255 kg; lognormal variance with pedigree 0.0262, pedigree (2,3,1,1,1)
  properties: UVEK_link_1 1040, UVEK_relative_amount_1 -1, carbon content, fossil 0.825301, dry mass 0.996 kg, heating value, net 42.47 MJ, water content 0.00401606, wet mass 1 kg

## Inputs from nature
- Occupation, industrial area [natural resource, land]: 0.00133333 m2*year; lognormal variance with pedigree 0.2026, pedigree (1,1,5,1,2)
- Transformation, from industrial area [natural resource, land]: 0.00133333 m2; lognormal variance with pedigree 0.3526, pedigree (1,3,5,1,1)
- Transformation, to industrial area [natural resource, land]: 0.00133333 m2; lognormal variance with pedigree 0.3526, pedigree (1,3,5,1,1)

## Sampling procedure
Sample from 4 nurseries in
