# welding, gas, steel

Dataset: EcoSpold 2, unit process
Geography: RoW
Time period: 1997-01-01 to 2022-12-31
Technology level: current
Classification: ISIC rev.4 ecoinvent: 2592:Treatment and coating of metals; machining
Classification: EcoSpold01Categories: metals/processing
Tags: ConvertedDataset
Scenario: Business-as-Usual
System model: Substitution, consequential, long-term
Generated by: Hans-Jörg Althaus
Published in: Werner F. 2007
Database: ecoinvent
isCopyrightProtected: true
accessRestrictedTo: 1

## General comment
Based partly on rather rough estimates and on input data of poor quality (acetylene). Not to be used if welding is of importance in the system considered.
[This dataset was already contained in the ecoinvent database version 2. It was not individually updated during the transfer to ecoinvent version 3. Life Cycle Impact Assessment results may still have changed, as they are affected by changes in the supply chain, i.e. in other datasets. This dataset was generated following the ecoinvent quality guidelines for version 2. It may have been subject to central changes described in the ecoinvent version 3 change report (http://www.ecoinvent.org/database/ecoinvent-version-3/reports-of-changes/), and the results of the central updates were reviewed extensively. The changes added e.g. consistent water flows and other information throughout the database. The documentation of this dataset can be found in the ecoinvent reports of version 2, which are still available via the ecoinvent website. The change report linked above covers all central changes that were made during the conversion process.]

## Included activities end
Includes the acetylene welding of non alloyed steel and the transports of the filler rod and the protective gas to the place of use.

## Geography
Data-set is representive for Europe

## Technology
Acetylene welding with a wire consumption of 0.0536 kg/m

## Reference product
- welding, gas, steel: 1 m; By-product classification allocatable product; CPC 88731: Metal treatment and coating services
  production volume 2.67763 m
  properties: carbon allocation 0 kg, carbon content 0, price 0.0345862 EUR2005

## Inputs from technosphere
- acetylene: 0.00976 kg; lognormal variance with pedigree 0.118, pedigree (4,5,5,5,4)
  properties: carbon content, fossil 0.923077, dry mass 1 kg, heating value, net 51.2 MJ, wet mass 1 kg
- oxygen, liquid: 0.0114 kg; lognormal variance with pedigree 0.118, pedigree (4,5,5,5,4)
  properties: dry mass 1 kg, wet mass 1 kg
- steel, low-alloyed, hot rolled: 0.0536 kg; lognormal variance with pedigree 0.038, pedigree (4,5,5,5,1)
  properties: carbon content, fossil 0.005, dry mass 1 kg, wet mass 1 kg

## Emissions to nature
- Carbon dioxide, fossil [air, unspecified]: 0.0324 kg; lognormal variance with pedigree 0.116, pedigree (4,5,5,5,3)
- Carbon monoxide, fossil [air, unspecified]: 0.000203 kg; lognormal variance with pedigree 0.776, pedigree (4,5,5,5,3)
- Chromium III [air, unspecified]: 2.81e-5 kg; lognormal variance with pedigree 0.758, pedigree (1,5,5,5,3)
- Chromium VI [air, unspecified]: 3e-8 kg; lognormal variance with pedigree 0.758, pedigree (1,5,5,5,3)
- Copper ion [air, unspecified]: 2.1e-7 kg; lognormal variance with pedigree 0.148, pedigree (1,5,5,5,3)
- Ethyne [air, unspecified]: 9.76e-5 kg; lognormal variance with pedigree 0.5, pedigree (5,5,5,5,5)
- Iron ion [air, unspecified]: 8.74e-5 kg; lognormal variance with pedigree 0.148, pedigree (1,5,5,5,3)
- Manganese II [air, unspecified]: 1.12e-5 kg; lognormal variance with pedigree 0.758, pedigree (1,5,5,5,3)
- Molybdenum VI [air, unspecified]: 2.16e-6 kg; lognormal variance with pedigree 0.758, pedigree (1,5,5,5,3)
- Nickel II [air, unspecified]: 1.12e-5 kg; lognormal variance with pedigree 0.758, pedigree (1,5,5,5,3)
- Nitrogen oxides [air, unspecified]: 2e-6 kg; lognormal variance with pedigree 0.148, pedigree (1,5,5,5,3)
- Ozone [air, unspecified]: 9.06e-6 kg; lognormal variance with pedigree 0.148, pedigree (1,5,5,5,3)
- Particulate Matter, < 2.5 um [air, unspecified]: 0.000141 kg; lognormal variance with pedigree 0.426, pedigree (4,5,5,5,3)
- Zinc II [air, unspecified]: 4.2e-7 kg; lognormal variance with pedigree 0.758, pedigree (1,5,5,5,3)

## Sampling procedure
Literature

## Extrapolations
none This dataset has been copied from an original dataset covering the geography RER. The uncertainty has been adjusted accordingly.

## Review by Roland Hischier 2003-06-17
Passed.
