# tree seedling production, in unheated greenhouse

Dataset: EcoSpold 2, unit process
Geography: RoW
Time period: 2002-01-01 to 2022-12-31
Technology level: current
Classification: ISIC rev.4 ecoinvent: 0130:Plant propagation
Classification: EcoSpold01Categories: wooden materials/extraction
Scenario: Business-as-Usual
System model: Substitution, consequential, long-term
Generated by: [System]
Database: ecoinvent
isCopyrightProtected: true
accessRestrictedTo: 1

## General comment
The dataset refers to the production of 1000 tree seedlings. The dataset contains the production of tree seedlings in a tree nursery for plantation in forests. The seedlings are produced in an unheated greenhouse and packed for transport.
The seedlings go with a packaging of 1.05 kg of growing dras (HDPE), 3.65 kg of plant boxes from cardboard and 0.0525 kg of strech wrap (LLDPE), to be recycled or disposed of after planting

## Included activities start
The activity starts with the establishment of the greenhouse with HDPE film and considers soil improvement, fertilization, transport of inputs and transport packaging materials.The dataset also contains the disposal of the transport packaging (after plantation of the seedling).

## Included activities end
The activity ends with the seedlings packed for transportation. The dataset does not contain data on water use, frame infrastructure of the greenhouse and on the use of fungicides, insecticides etc. as source does not provide this information.

## Reference product
- tree seedling, for planting: 1 unit; By-product classification allocatable product; CPC 01961: Live plants; bulbs, tubers and roots; cuttings and slips; mushroom spawn
  production volume 1.31599e14 unit
  properties: carbon allocation 0 kg, carbon content 0, price 0.0627493 EUR2005

## Inputs from technosphere
- diesel, burned in building machine: 0.0184 MJ; lognormal variance with pedigree 0.24, pedigree (5,5,5,5,5)
  properties: heating value, net 1 MJ
- electricity, medium voltage: 0.006709, 0.000251018, 0.00318927, 0.0553537, 0.00464792, 0.000249125 kWh (6 suppliers, which the file names only by identifier); sum of these 0.0704 kWh; lognormal variance with pedigree 0.24, pedigree (5,5,5,5,5)
- extrusion, plastic film: 0.001106 kg; lognormal variance with pedigree 0.24, pedigree (5,5,5,5,5)
- heat, central or small-scale, other than natural gas: 0.0027 MJ; lognormal variance with pedigree 0.24, pedigree (5,5,5,5,5)
  properties: heating value, net 1 MJ
- inorganic nitrogen fertiliser, as N: 5.55151e-5, 2.19332e-8, 2.32131e-6, 5.49638e-7, 1.50389e-6, 1.49964e-6, 1.64335e-7, 4.22226e-5, 1.43449e-6, 1.43286e-5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 kg (28 suppliers, which the file names only by identifier); sum of these 0.000609 kg; lognormal variance with pedigree 0.24, pedigree (5,5,5,5,5)
  properties: dry mass 1 kg, wet mass 1 kg
- packaging film, low density polyethylene: 0.0001655 kg; lognormal variance with pedigree 0.24, pedigree (5,5,5,5,5)
  properties: carbon content, fossil 0.857143, dry mass 1 kg, heating value, net 42.47 MJ, wet mass 1 kg
- packaging, for fertilisers: 0.001218 kg; lognormal variance with pedigree 0.0512, pedigree (4,3,5,5,4)
  properties: carbon content, fossil 0.825301, dry mass 1 kg, heating value, net 25.01 MJ, price 0.0642 EUR2005, wet mass 1 kg
- polyethylene, high density, granulate: 0.001106 kg; lognormal variance with pedigree 0.24, pedigree (5,5,5,5,5)
  properties: carbon content, fossil 0.857143, dry mass 1 kg, heating value, net 42.47 MJ, wet mass 1 kg
- polystyrene, extruded: 4.5e-5 kg; lognormal variance with pedigree 0.24, pedigree (5,5,5,5,5)
  properties: carbon content, fossil 0.873427, dry mass 1 kg, heating value, net 38.67 MJ, wet mass 1 kg
- waste polyethylene: -0.00109387, -1.04403e-5, -4.31222e-6, -1.74209e-6, -0.000156254, -7.89584e-7, -4.09486e-6 kg (7 suppliers, which the file names only by identifier); sum of these -0.0012715 kg
  properties: carbon content, fossil 0.825301, dry mass 0.996 kg, heating value, net 42.47 MJ, water content 0.00401606, wet mass 1 kg

## Inputs from nature
- Occupation, industrial area [natural resource, land]: 0.00133333 m2*year; lognormal variance with pedigree 0.2, pedigree (1,1,5,1,2)
- Transformation, from industrial area [natural resource, land]: 0.00133333 m2; lognormal variance with pedigree 0.36, pedigree (1,5,5,5,1)
- Transformation, to industrial area [natural resource, land]: 0.00133333 m2; lognormal variance with pedigree 0.36, pedigree (1,5,5,5,1)

## Sampling procedure
Sample from 4 nurseries in

## Review by Thomas Nemecek 2014-02-02
Users should bear in mind that heat requirements show a wide variability according to the different situations.
