# photovoltaic panel factory construction

Dataset: EcoSpold 2, unit process
Geography: GLO
Time period: 2000-01-01 to 2022-12-31
Technology level: current
Classification: ISIC rev.4 ecoinvent: 4290:Construction of other civil engineering projects
Classification: EcoSpold01Categories: photovoltaic/production of components
Tags: ConvertedDataset
Scenario: Business-as-Usual
System model: Substitution, consequential, long-term
Share of production covered: 10 %
Generated by: Niels Jungbluth
Published in: Jungbluth, N. 2007
Database: ecoinvent
isCopyrightProtected: true
accessRestrictedTo: 1

## General comment
Capacity of 10'000 modules per year. Life time assumed to be 25 years.
[This dataset was already contained in the ecoinvent database version 2. It was not individually updated during the transfer to ecoinvent version 3. Life Cycle Impact Assessment results may still have changed, as they are affected by changes in the supply chain, i.e. in other datasets. This dataset was generated following the ecoinvent quality guidelines for version 2. It may have been subject to central changes described in the ecoinvent version 3 change report (http://www.ecoinvent.org/database/ecoinvent-version-3/reports-of-changes/), and the results of the central updates were reviewed extensively. The changes added e.g. consistent water flows and other information throughout the database. The documentation of this dataset can be found in the ecoinvent reports of version 2, which are still available via the ecoinvent website. The change report linked above covers all central changes that were made during the conversion process.]

## Included activities end
Materials and land use for a new production plant.

## Geography
Different producers world wide

## Technology
Production plant in an industrial area.

## Time period
Date of literature publications

## Reference product
- photovoltaic panel factory: 1 unit; By-product classification allocatable product; CPC 53269: Other constructions for manufacturing
  production volume 1 unit
  properties: carbon allocation 0 kg, carbon content 0, price 118560 EUR2005

## Inputs from technosphere
- building, hall: 799.15 m2; lognormal variance with pedigree 0.3001, pedigree (1,2,5,1,1)
- metal working machine, unspecified: 2677.63, 1322.37 kg (2 suppliers, which the file names only by identifier); sum of these 4000 kg; lognormal variance with pedigree 0.398, pedigree (5,5,5,1,1)

## Inputs from nature
- Occupation, industrial area [natural resource, land]: 39789 m2*year; lognormal variance with pedigree 0.0401, pedigree (1,2,5,1,1)
- Occupation, traffic area, road network [natural resource, land]: 2870.2 m2*year; lognormal variance with pedigree 0.0401, pedigree (1,2,5,1,1)
- Transformation, from unspecified [natural resource, land]: 1706.4 m2; lognormal variance with pedigree 0.1201, pedigree (1,2,5,1,1)
- Transformation, to industrial area [natural resource, land]: 1591.58 m2; lognormal variance with pedigree 0.1201, pedigree (1,2,5,1,1)
- Transformation, to traffic area, road network [natural resource, land]: 114.81 m2; lognormal variance with pedigree 0.1201, pedigree (1,2,5,1,1)

## Sampling procedure
Environmental report and literature.

## Review by Roberto Dones 2007-08-23
Passed.
none
