# operation, printer, laser, black/white, per kg printed paper

Dataset: EcoSpold 2, unit process
Geography: RoW
Time period: 2002-01-01 to 2022-12-31
Technology level: current
Classification: EcoSpold01Categories: electronics/services
Classification: ISIC rev.4 ecoinvent: 8219:Photocopying, document preparation and other specialized office support act
Tags: Operation
Scenario: Business-as-Usual
System model: Substitution, consequential, long-term
Generated by: Martin Lehmann
Published in: Hischier R. 2007
Database: ecoinvent
isCopyrightProtected: false
accessRestrictedTo: 1

## General comment
The laser jet printer use (b/w, office) is calculated via the active mode electricity consumption taken from literature information. The dataset includes the share of the printer production (assumed life span 4 years), the energy consumption for the different modes in the use-phase, the toner usage as well as the benzene emissions for the printing of 1 kg of paper.
Reccomended printing volume for this kind of printer is 20,000 pages/months (http://www.epson.de/de/en/viewcon/corporatesite/products/mainunits/specs/9538). Paper quality assumptions; one sheet of paper weights 5g (80g/m2 as an average printing paper).

## Included activities end
Describes the use of a laser jet printer (monochrome) in an office. Calculated per 1 kg of printed paper. UCTE production mix applied for electricity consumption (low voltage).

## Geography
The data is based on information by international printer manufacturers and literature. Due to relatively vague literature data for laser jet printer life span and mode splits, assumptions had to be made.

## Technology
No technology involved, except for the production of printer and toner, which are represented in the individual subdatasets.

## Reference product
- printed paper: 1 kg; By-product classification allocatable product; CPC 32129: Other uncoated paper and paperboard, of a kind used for writing, printing or other graphic purposes, and punch[…]
  production volume 1.39485e10 kg
  properties: carbon allocation 0.264157 kg, carbon content 0.279531, carbon content, fossil 0.032531, carbon content, non-fossil 0.247, dry mass 0.945 kg, heating value, net 14.11 MJ, price 5.44846 EUR2005, water content 0.0582011, water in wet mass 0.055 kg, wet mass 1 kg

## Inputs from technosphere
- electricity, low voltage: 0.00332146, 0.000246949, 0.000982378, 0.00550776, 0.00708243, 0.000736427, 0.0591226 kWh (7 suppliers, which the file names only by identifier); sum of these 0.077 kWh; lognormal variance with pedigree 0.0034, pedigree (2,3,5,5,1)
- paper, woodcontaining, lightweight coated: 1 kg
  properties: carbon content, fossil 0.032531, carbon content, non-fossil 0.247213, dry mass 0.945 kg, heating value, net 14.11 MJ, water content 0.0582011, wet mass 1 kg
- printer, laser, black/white: 0.000208333 unit; lognormal variance with pedigree 0.0146, pedigree (3,3,5,5,1)
  properties: carbon content, fossil 0.571055, dry mass 6 kg, lifetime 4 year, lifetime capacity [kg] 4800 kg, wet mass 6 kg
- toner module, laser printer, black/white: 0.04 unit; lognormal variance with pedigree 0.011225, pedigree (2,3,5,2,1)
  properties: carbon content, fossil 0.510352, dry mass 1.14 kg, wet mass 1.14 kg
- used toner module, laser printer, black/white: -0.0352 kg; lognormal variance with pedigree 0.0126, pedigree (4,4,1,5,1)

## Emissions to nature
- Benzene [air, unspecified]: 1.8462e-7 kg; lognormal variance with pedigree 0.1406, pedigree (2,5,5,5,1)

## Sampling procedure
Manufacturers, literature and own assumptions.

## Extrapolations
see Geography and Technology This dataset has been copied from an original dataset covering the geography Europe without Switzerland. The uncertainty has been adjusted accordingly.

## Review by Emilia Moreno Ruiz 2013-01-15
paper has been added as input from technosphere; and printed paper as a reference product
