# lime production, algae

Dataset: EcoSpold 2, unit process
Geography: FR
Time period: 2002-01-01 to 2022-12-31
Technology level: current
Classification: ISIC rev.4 ecoinvent: 0891:Mining of chemical and fertilizer minerals
Classification: EcoSpold01Categories: agricultural means of production/mineral fertiliser
Tags: ConvertedDataset
Scenario: Business-as-Usual
System model: Substitution, consequential, long-term
Generated by: Angelika Heil
Published in: Nemecek, T. 2007
Database: ecoinvent
isCopyrightProtected: true
accessRestrictedTo: 1

## General comment
Values originate from a single producer of lime from algae in France, which, however, can be considered typical for the Swiss market.
[This dataset was already contained in the ecoinvent database version 2. It was not individually updated during the transfer to ecoinvent version 3. Life Cycle Impact Assessment results may still have changed, as they are affected by changes in the supply chain, i.e. in other datasets. This dataset was generated following the ecoinvent quality guidelines for version 2. It may have been subject to central changes described in the ecoinvent version 3 change report (http://www.ecoinvent.org/database/ecoinvent-version-3/reports-of-changes/), and the results of the central updates were reviewed extensively. The changes added e.g. consistent water flows and other information throughout the database. The documentation of this dataset can be found in the ecoinvent reports of version 2, which are still available via the ecoinvent website. The change report linked above covers all central changes that were made during the conversion process.]

## Included activities end
The inventory contains transports connected with the collection of the algae from the sea ground and the delivery to the fertiliser plant as well as the distribution of the usable product to the regional storehouse. Energy requirements for drying of the algae from a water content of 25 % per weight to a final water content of 2.5 %, and milling of the algae were taken into consideration. Demand of the resource calcite contained in the algae was included. Infrastructure and land use were included by means of a proxy-module.

## Geography
The values refer to the market situation in Switzerland. The production takes place in France.

## Technology
Values refer to a commonly used technology for this product.

## Time period
Year when data for the inventory were communicated

## Reference product
- lime: 1 kg; By-product classification allocatable product; CPC 161: Chemical and fertilizer minerals
  production volume 3e7 kg
  properties: carbon allocation 0.117005 kg, carbon content 0.120005, carbon content, fossil 0, carbon content, non-fossil 0.120005, dry mass 0.975 kg, heating value, net 0 MJ, price 0.117 EUR2005, water content 0.025641, water in wet mass 0.025 kg, wet mass 1 kg

## Inputs from technosphere
- chemical factory, organics: 4e-10 unit; lognormal variance with pedigree 0.1327, pedigree (3,3,5,3,1)
- electricity, low voltage: 0.02 kWh; lognormal variance with pedigree 0.0127, pedigree (3,3,5,3,1)
- heat, district or industrial, natural gas: 1.5 MJ; lognormal variance with pedigree 0.0127, pedigree (3,3,5,3,1)
  properties: heating value, net 1 MJ

## Inputs from nature
- Calcite [natural resource, in ground]: 0.892 kg; lognormal variance with pedigree 0.0127, pedigree (3,3,5,3,1)

## Sampling procedure
Data retrieved from a manufacturer in France.

## Review by Maggie Osses 2003-07-25
Passed.
