# electricity production, natural gas, combined cycle power plant

Dataset: EcoSpold 2, unit process
Geography: TH
Time period: 2000-01-01 to 2022-12-31
Technology level: modern
Classification: ISIC rev.4 ecoinvent: 3510:Electric power generation, transmission and distribution
Classification: EcoSpold01Categories: natural gas/power plants
Synonyms: CCPP; CCGT; GuD; GCC
Tags: natural gas power; fossil fuels
Scenario: Business-as-Usual
System model: Substitution, consequential, long-term
Generated by: Karin Treyer
Published in: Faist Emmenegger, M. 2007
Database: ecoinvent
isCopyrightProtected: true
accessRestrictedTo: 1

## General comment
This dataset represents the production of high voltage electricity in a combined cycle natural gas power plant without CHP (combined heat and power) in Thailand in 2012.
['text', 'In a combined cycle power plant, a gas turbine is followed by a steam turbine. The dataset refers to a combined cycle power plant of 400MWe class with a gas turbine 260MWe and a steam turbine 140MWe.']
['text', 'For electricity production with natural gas, four different datasets relying to different power plant types exist:']
['text', ' - conventional power plant with / without CHP']
['text', ' - combined cycle power plant with / without CHP']
['text', 'At the moment, these datasets differ in nothing but the efficiency. High voltage electricity (at the busbar) is the reference product, whereupon heat is a by-product in CHP plants. Out of all fossile fuels, natural gas holds worldwide the highest share of CHP plants besides peat. Furthermore, natural gas power plants are today often designed with combined cycles. The advantages of a combined cycle power plant are for example: ']
['text', ' - a higher efficiency (approximately between 50-60% compared to ca. 33% for a conventional power plant)']
['text', ' - high operating flexibility']
['text', ' - lower emissions due to higher efficiency']
['text', ' - lower cooling water need. ']
['text', 'The approximate share of combined cycle natural gas power plants in Thailand amounts to ca. {{cc_share}}. {{chp}} combined heat power plants (calculations made with IEA/OECD statistics and own assumptions). ']
['text', 'The efficiency calculations are based on IEA/OECD statistics (fuel inputs, electricity produced) and some own calculation assumptions. . Reducing factors such as contaminations of important plant parts, cooling conditions or part load have been taken into account. Even if efficiencies vary with different surrounding temperatures, a medium efficiency is assumed for all countries. Temperature adjustments would be related to high uncertainties.']
['text', 'Water is used for wet cooling and as feed water in the steam circuit. In this dataset, 100% wet cooling and no once-through cooling is assumed. ']
['text', 'EMISSIONS:']
['text', 'Different sources served as basis for assumption of average emissions. Where possible, the most recent sources were taken into account, whereas older sources were taken in order to determine the remaining data gaps. The emissions have been fixed for the former UCTE region* and have been overtaken as such for all countries without value adaptation (adaptation of the uncertainty). See ecoinvent report 'Erdgas' given as main source for details (Tab. 11.15). In the following a short overview:']
['text', ' - Emissions of NOx, CO, CO2, SO2, particles, N2O and CH4 are mainly taken from CORINAIR 2001, EPA, and a variety of other data sources ']
['text', '-\tNOx emissions are a major challenge in natural gas power plants. With rising temperature, emissions also rise; band widths of NOx emissions in literature are correspondingly large. There are several methods to diminish these emissions.']
['text', '-\tCO is a result of uncomplete burning. For economic and technical reasons, plant combustion is optimized and CO emissions are low. ']
['text', '-\tCO2 and SO2 emissions are dependent on the composition of the used fuel. Due to the low sulfur content of the used natural gas, no desulfurization has to take place.']
['text', '-\tOrganic compound emissions are estimated on the basis of EPA 1998. ']
['text', '-\tParticles are assumed to be smaller than 2.5 micro-m']
['text', 'former UCTE: Union for the Coordination of the Transmission of Electricity, since 2009 replaced by ENTSO-E European Network of Transmission System Operators for Electricity.']
['text', 'Sources:']
['text', '-\tCORINAIR 2001. EMEP/CORINAIR 2001: Joint EMEP/CORINAIR Atmospheric Emission Inventory Guidebook, Third Edition. Copenhagen: European Environment Agency, 2001. http://reports.eea.eu.int/technical_report_2001_3/en.']
['text', '-\tEPA 1998. US Environmental Protection Agency (1998). Compilation of Air Pollutant Emission Factors, AP-42, Fifth Edition, Volume I: Chapter 1: External Combustion Sources, Natural Gas Combustion - Final Section - Supplement D , July 1998. CHIEF (Clearinghouse for Inventories and Emission Factors). Research Triangle Park, North Carolina. http://www.epa.gov/ttn/chief/ap42/.']
['text', '-\tRentz O., Karl U., Peter H. (2002). Ermittlung und Evaluierung von Emissionsfaktoren f\xfcr Feuerungsanlagen in Deutschland f\xfcr die Jahre 1995, 2000 und 2010. Deutsch- Franz\xf6sisches Institut f\xfcr Umweltforschung, Uni Karsruhe. Endbericht. Im Auftrag des Umweltbundesamtes. Forschungsbericht 299 43 142. Umweltbundesamt. Berlin.']

## Included activities start
From the constructed combined cycle natural gas power plant ready to produce electricity.

From reception of natural gas and operating materials at power plant/factory gate

## Included activities end
This activity ends with 1kWh of high voltage electricity produced at the power plant and arrived at the busbar.

This dataset includes:
- all operation and maintenance activities and materials of the power plants.
- Cooling: It is a assumed that all plants use wet cooling with a cooling tower. No cooling tower is included in this dataset (will be implemented in future versions)
- decarbonised water use for reduction of NOx emissions

This dataset doesn't include
- raw materials extraction, decommissioning and waste treatment as these activities are already included in the infrastructure datasets.
- transformation of the electricity produced.

## Technology
Combined cycle power plant of 400MWe class with a gas turbine 265MWe and a steam turbine 140MWe. The plant is used for middle load with 5000 hours of operation at full capacity per year. The plant is assumed to operate 180000 hours during its lifetime.

## Time period
The Annual Production Volume is valid for the year 2012.

## Parameters
- efficiency: 0.517 dimensionless; lognormal variance with pedigree 0.017225, pedigree (4,3,1,2,3)
  Literature value/calculated value/estimation. Net electrical efficiency based on the lower heating value (LHV). For all OECD countries, the IEA Electricity information 2014 provides data for the year 2012 on natural gas fuel input (TJ, Net calorific value NCV) and gross electricity production (GWh) as well as heat production (TJ) in tables 8 and 9 for each country for electricity only and Combined Heat and Power (CHP) plants each.
  For all non-OECD countries, data from the IEA electricity information 2014, tables 1.3 (electricity production) and table 1.5 (fuel input) have been used. In cases where only total values for electricity production in electricity only/CHP plants were given, the total value was applied to both types.
  Together with the information on own use (see parameter 'losses'), the net electrical efficiency based on the NCV in natural gas electricity only and CHP plants is calculated. Based on the estimated shares of the four natural gas types (see general comment) and assumed average and maximum values for efficiency in each of these types, the resulting estimated electrical efficiency per country and type was calculated.
  Estimated average and maximum efficiencies for the four power plant types (based on expert judgment and literature values):
  - conventional power plant, w/o CHP: 0.33 / 0.45
  - conventional power plant, with CHP: 0.28 / 0.38
  - combined cycle power plant, w/o CHP: 0.53 / 0.6
  - combined cycle power plant, with CHP: 0.37 / 0.5
  IEA. 2014. Electricity Information 2014. ISBN 978-92-64-21692-1. International Energy Agency (IEA), Paris Cedex (FR).
  IEA/OECD. 2014. Energy balances of non-OECD countries 2014. International Energy Agency (IEA), Paris Cedex (FR).
  output relative to input (requires additional specification)
- factor: input of MJ for the production of 1 kWh: 6.96325 MJ/kWh; name factor_MJ_kWh; = 1*3.6/efficiency; lognormal variance with pedigree 0.0532, pedigree (4,4,3,4,4)
  Calculated value. 3.6 MJ = 1kWh.
  nan
- fraction, cooling water, to air: 0.0159178 dimensionless; name fraction_CW_to_air; = (WConsumption_EP_NG_recirculatingCS*recirculating_CS_fraction_from_allCS+WConsumption_EP_NG_onceT_andCP_CS*once_through_andCP_CS_fractio_from_allCS)/(WWithdrawal_EP_NG_recirculating_CS*recirculating_CS_fraction_from_allCS+WWithdrawal_EP_NG_onceT_andCP_CS*once_through_andCP_CS_fractio_from_allCS); lognormal variance with pedigree 0.092025, pedigree (4,4,3,2,4)
  Calculated
  nan
- fraction, process water, to air: 0.15 dimensionless; name fraction_PW_to_air; lognormal variance with pedigree 0.092025, pedigree (4,4,3,2,4)
  Literature value. In case when no industry/process specific data are available, default evaporation fraction value is used. This value is 15% and is based on literature (Statistics Canada, 2007 & Shaffer, K.H., 2008, Consumptive water use in the Great Lakes Basin, USGS & Shiklomanov, 2003, World Water Resources at the Beginning of the 21st Century) and has been approved by an expert.
  nan
- fraction, water, completely softened, to air: 0.15 dimensionless; name fraction_WCS_to_air; = fraction_PW_to_air; lognormal variance with pedigree 0.092025, pedigree (4,4,3,2,4)
  Calculated value. See comment in the other parametres present in this dataset. Water, completely softened is considered to be always used as process water, thus process water fractions to air are applied to all water, completely softened input flows to calculate the amount of water consumed in the processes.
  nan
- fraction, water, decarbonised, to air: 0.0159178 dimensionless; name fraction_WDC_to_air; = fraction_CW_to_air; lognormal variance with pedigree 0.092025, pedigree (4,4,3,2,4)
  Calculated value. See comments in the other parametres present in this dataset. Decarbonised water is considered to be always used as cooling water, thus cooling water fractions to air are applied to all carbonised water input flows to calculate the amount of water consumed in the processes.
  nan
- gross electricity production: 8.01579e10 kWh; name gross_electricity; lognormal variance with pedigree 0.003225, pedigree (3,1,1,2,2)
  Assumption. This production volume had to be altered in order to obtain realistic shares of technologies on the Rest-of-World electricity market. By definition, no global electricity market exists in ecoinvent, but only the local electricity markets and the RoW electricity market.
  ORIGINAL STATISTICAL VALUE as described below:
  3.1613E+12 kWh
  Literature value. Gross grid-connected natural gas electricity production in electricity plants (no CHP, but conventional and combined cycle). Gross value from the official OECD/IEA gross electricity production 2008 statistics, including data from 196 countries.
  In the IEA statistics, 'gas' includes natural gas (excluding
  natural gas liquids) and gas works gas (town gas).
  IEA/OECD. 2010. Energy balances of non OECD countries 2010. Statistics of the Internationsl Energy Agency, Paris. Part II - Statistical Data. Graphs and Energy Balance Sheets 2007-2008, Regional Totals.
  nan
- losses from gross electricity production: 0.07 dimensionless; name losses_gross_net; lognormal variance with pedigree 0.017225, pedigree (4,3,1,2,3)
  Calculated value. Own use of electricity plants in this country in 2012. For the non-OECD countries, the losses were first calculated for the total electricity sector based on the IEA electricity information 2014, table 1.1 (net electricity = gross electricity minus own use). However, this value can be very low if the share of electricity from fossiles is low in a specific country. Therefore, the default loss as described by the IEA in the electricity statistic is applied, which is 0.07 (IEA electricity information 2014: The difference between gross and net electricity production is generally observed to be about 7% for conventional thermal stations, 1% for hydro stations and 6% for nuclear.)
  IEA. 2014. Electricity Information 2014. ISBN 978-92-64-21692-1. International Energy Agency (IEA), Paris Cedex (FR).
  nan
- once-through and cooling pond cooling systems as a fraction of all cooling syste: 0.625 dimensionless; name once_through_andCP_CS_fractio_from_allCS; lognormal variance with pedigree 0.092025, pedigree (4,4,3,2,4)
  Calculated as an average of data available for Europe (Floerke, 2008, Future changes of freshwater needs in the electricity production sector) and USA (NERL, 2011, Estimating freshwater needs to meet future thermoelectric generation requirements).
  nan
- recirculating cooling system as a fraction of all cooling systems: 0.375 dimensionless; name recirculating_CS_fraction_from_allCS; lognormal variance with pedigree 0.092025, pedigree (4,4,3,2,4)
  (same comment as for once-through and cooling pond cooling systems as a fraction of all coo)
- water consumption, electricity production from NG, once-T and coolingP CS: 0.0018 m3/kWh; name WConsumption_EP_NG_recirculatingCS; lognormal variance with pedigree 0.092025, pedigree (4,4,3,2,4)
  Estimated based on literature (Scown, 2011, Water Footprint of U.S. Transportation Fuels, SI).
  nan
- water consumption, electricity production from NG, recirculating CS: 0.0005 m3/kWh; name WConsumption_EP_NG_onceT_andCP_CS; lognormal variance with pedigree 0.092025, pedigree (4,4,3,2,4)
  (same comment as for water consumption, electricity production from NG, once-T and coolingP)
- water withdrawal, electricity production from NG, once-T and coolingP CS: 0.0021 m3/kWh; name WWithdrawal_EP_NG_recirculating_CS; lognormal variance with pedigree 0.092025, pedigree (4,4,3,2,4)
  (same comment as for water consumption, electricity production from NG, once-T and coolingP)
- water withdrawal, electricity production from NG, recirculating CS: 0.098 m3/kWh; name WWithdrawal_EP_NG_onceT_andCP_CS; lognormal variance with pedigree 0.092025, pedigree (4,4,3,2,4)
  (same comment as for water consumption, electricity production from NG, once-T and coolingP)

## Reference product
- electricity, high voltage: 1 kWh; By-product classification allocatable product; CPC 17100: Electrical energy
  production volume 7.04014e10 kWh
  properties: carbon allocation 0 kg, carbon content 0, price 0.0977 EUR2005

## Inputs from technosphere
- gas power plant, combined cycle, 400MW electrical: 1.38889e-11 unit; lognormal variance with pedigree 0.1332, pedigree (3,3,5,4,3)
- natural gas, high pressure: 0.193424 m3; lognormal variance with pedigree 0.002, pedigree (1,1,3,5,1)
  properties: carbon content, fossil 0.602381, dry mass 0.84 kg, heating value, net 36 MJ, wet mass 0.84 kg
- residue from cooling tower: -6.96325e-6 kg; lognormal variance with pedigree 1.0747, pedigree (4,3,4,3,3)
  properties: carbon content, fossil 0.0544233, dry mass 0.7 kg, water content 0.428571, wet mass 1 kg
- water, completely softened: 0.0417795 kg; lognormal variance with pedigree 0.228625, pedigree (4,3,5,2,3)
  properties: wet mass 1 kg
- water, decarbonised: 1.39265 kg; lognormal variance with pedigree 0.2292, pedigree (4,3,5,4,3)
  properties: wet mass 1 kg

## Inputs from nature
- Water, cooling, unspecified natural origin [natural resource, in water]: 0.0411412 m3; lognormal variance with pedigree 0.092025, pedigree (4,4,5,2,4)

## Emissions to nature
- Acenaphthene [air, non-urban air or from high stacks]: 5.52186e-12 kg; lognormal variance with pedigree 0.6487, pedigree (3,3,5,3,3)
- Acetaldehyde [air, non-urban air or from high stacks]: 5.5706e-9 kg; lognormal variance with pedigree 1.0747, pedigree (4,3,5,3,3)
- Acetic acid [air, non-urban air or from high stacks]: 8.42553e-7 kg; lognormal variance with pedigree 1.0687, pedigree (3,3,5,3,3)
- Arsenic ion [air, non-urban air or from high stacks]: 2.8619e-10 kg; lognormal variance with pedigree 0.06, pedigree (3,5,5,5,4)
- Benzene [air, non-urban air or from high stacks]: 6.28085e-9 kg; lognormal variance with pedigree 0.6487, pedigree (3,3,5,3,3)
- Benzo(a)pyrene [air, non-urban air or from high stacks]: 3.68356e-12 kg; lognormal variance with pedigree 0.6487, pedigree (3,3,5,3,3)
- Beryllium II [air, non-urban air or from high stacks]: 1.71992e-11 kg; lognormal variance with pedigree 0.06, pedigree (3,5,5,5,4)
- Butane [air, non-urban air or from high stacks]: 6.44797e-6 kg; lognormal variance with pedigree 0.6487, pedigree (3,3,5,3,3)
- Cadmium II [air, non-urban air or from high stacks]: 1.57369e-9 kg; lognormal variance with pedigree 0.06, pedigree (3,5,5,5,4)
- Carbon dioxide, fossil [air, non-urban air or from high stacks]: 0.371838 kg; lognormal variance with pedigree 0.0193, pedigree (3,3,5,3,3)
- Carbon monoxide, fossil [air, non-urban air or from high stacks]: 1.53191e-5 kg; lognormal variance with pedigree 0.3032, pedigree (3,3,5,4,3)
- Chromium III [air, non-urban air or from high stacks]: 1.99845e-9 kg; lognormal variance with pedigree 0.028, pedigree (3,5,5,5,3)
- Cobalt II [air, non-urban air or from high stacks]: 1.19768e-10 kg; lognormal variance with pedigree 0.06, pedigree (3,5,5,5,4)
- Dinitrogen monoxide [air, non-urban air or from high stacks]: 6.80309e-6 kg; lognormal variance with pedigree 0.3087, pedigree (3,3,5,3,3)
- Dioxins, measured as 2,3,7,8-tetrachlorodibenzo-p-dioxin [air, non-urban air or from high stacks]: 2.01934e-16 kg; lognormal variance with pedigree 1.0747, pedigree (4,3,5,3,3)
- Ethane [air, non-urban air or from high stacks]: 9.53965e-6 kg; lognormal variance with pedigree 0.6487, pedigree (3,3,5,3,3)
- Formaldehyde [air, non-urban air or from high stacks]: 2.24913e-7 kg; lognormal variance with pedigree 0.6487, pedigree (3,3,5,3,3)
- Hexane [air, non-urban air or from high stacks]: 5.52186e-6 kg; lognormal variance with pedigree 0.6487, pedigree (3,3,5,3,3)
- Lead II [air, non-urban air or from high stacks]: 7.17215e-10 kg; lognormal variance with pedigree 0.06, pedigree (3,5,5,5,4)
- Manganese II [air, non-urban air or from high stacks]: 5.4383e-10 kg; lognormal variance with pedigree 0.06, pedigree (3,5,5,5,4)
- Mercury II [air, non-urban air or from high stacks]: 4.79072e-10 kg; lognormal variance with pedigree 0.6487, pedigree (3,3,5,3,3)
- Methane, fossil [air, non-urban air or from high stacks]: 6.76132e-6 kg; lognormal variance with pedigree 0.6487, pedigree (3,3,5,3,3)
- Nickel II [air, non-urban air or from high stacks]: 3.00116e-9 kg; lognormal variance with pedigree 0.06, pedigree (3,5,5,5,4)
- Nitrogen oxides [air, non-urban air or from high stacks]: 0.000177563 kg; lognormal variance with pedigree 0.3352, pedigree (3,3,5,4,4)
- PAH, polycyclic aromatic hydrocarbons [air, non-urban air or from high stacks]: 5.5706e-8 kg; lognormal variance with pedigree 1.0747, pedigree (4,3,5,3,3)
- Particulate Matter, < 2.5 um [air, non-urban air or from high stacks]: 3.41896e-6 kg; lognormal variance with pedigree 0.3347, pedigree (3,3,5,3,4)
- Pentane [air, non-urban air or from high stacks]: 8.00774e-6 kg; lognormal variance with pedigree 0.6487, pedigree (3,3,5,3,3)
- Propane [air, non-urban air or from high stacks]: 4.90909e-6 kg; lognormal variance with pedigree 0.6487, pedigree (3,3,5,3,3)
- Propionic acid [air, non-urban air or from high stacks]: 1.11412e-7 kg; lognormal variance with pedigree 1.0747, pedigree (4,3,5,3,3)
- Selenium IV [air, non-urban air or from high stacks]: 3.41896e-11 kg; lognormal variance with pedigree 0.6487, pedigree (3,3,5,3,3)
- Sulfur dioxide [air, non-urban air or from high stacks]: 3.98298e-6 kg; lognormal variance with pedigree 0.0197, pedigree (3,3,5,3,3)
- Toluene [air, non-urban air or from high stacks]: 1.04449e-8 kg; lognormal variance with pedigree 0.6487, pedigree (3,3,5,3,3)
- Water [air, unspecified]: 0.000683312 m3; lognormal variance with pedigree 0.092025, pedigree (4,4,5,2,4)
- Water [water, unspecified]: 0.0418923 m3; lognormal variance with pedigree 0.092025, pedigree (4,4,5,2,4)

## Sampling procedure
Literature

## Extrapolations
Data have been taken over from a dataset valid for the time period 2000-2005, relying on sources of the 90th. No changes were made for the 2008 dataset, but uncertainty was adjusted.
All exchange data were extrapolated from datasets of the following 11 countries: AT, BE, DE, ES, FR, GB, IT, JP, LU, NL, US. The data of those countries basically rely on data of the former UCTE (see general comment).

The efficiency is based on IEA/OECD statistics and calculated with own assumptions.

The cooling and feed water use has been taken over from datasets for electricity production with hard coal or lignite.

## Review by Carl Vadenbo 2015-06-22
The update of the whole electricity sector for the ecoinvent v3.2 database consist of hundreds of datasets. All these datasets have passed through a streamlined review processes where the underlying modelling of production volumes, technology shares and efficiencies was reviewed in detail prior to the datasets being submitted to the database.
