# mine construction, iron

Dataset: EcoSpold 2, unit process
Geography: GLO
Time period: 2000-01-01 to 2022-12-31
Technology level: current
Classification: ISIC rev.4 ecoinvent: 4290:Construction of other civil engineering projects
Classification: EcoSpold01Categories: metals/extraction
Tags: ConvertedDataset
Scenario: Business-as-Usual
System model: Substitution, consequential, long-term
Generated by: Hans-Jörg Althaus
Published in: Classen M. 2009
Database: ecoinvent
isCopyrightProtected: true
accessRestrictedTo: 1

## General comment
These data are a rough assumption. Yearly output is 40000000000 kg, life Time 30 years
[This dataset was already contained in the ecoinvent database version 2. It was not individually updated during the transfer to ecoinvent version 3. Life Cycle Impact Assessment results may still have changed, as they are affected by changes in the supply chain, i.e. in other datasets. This dataset was generated following the ecoinvent quality guidelines for version 2. It may have been subject to central changes described in the ecoinvent version 3 change report (http://www.ecoinvent.org/database/ecoinvent-version-3/reports-of-changes/), and the results of the central updates were reviewed extensively. The changes added e.g. consistent water flows and other information throughout the database. The documentation of this dataset can be found in the ecoinvent reports of version 2, which are still available via the ecoinvent website. The change report linked above covers all central changes that were made during the conversion process.]

## Included activities end
Infrastructure of the mine (without land use of the open mine itself) and of the enrichment plant.

## Technology
Buildings and stationary machines.

## Reference product
- mine infrastructure, iron: 1 unit; By-product classification allocatable product; CPC 53261: Mining constructions
  production volume 1 unit
  properties: carbon allocation 0 kg, carbon content 0, price 6.7936e6 EUR2005

## Inputs from technosphere
- building, hall: 40000 m2; lognormal variance with pedigree 0.8, pedigree (5,5,5,5,5)
- building, multi-storey: 10000 m3; lognormal variance with pedigree 0.8, pedigree (5,5,5,5,5)
- industrial machine, heavy, unspecified: 133882, 66118.5 kg (2 suppliers, which the file names only by identifier); sum of these 200000 kg; lognormal variance with pedigree 0.8, pedigree (5,5,5,5,5)

## Inputs from nature
- Occupation, industrial area [natural resource, land]: 1.5e6 m2*year; lognormal variance with pedigree 0.8, pedigree (5,5,5,5,5)
- Transformation, from unspecified [natural resource, land]: 50000 m2; lognormal variance with pedigree 0.8, pedigree (5,5,5,5,5)
- Transformation, to industrial area [natural resource, land]: 50000 m2; lognormal variance with pedigree 0.8, pedigree (5,5,5,5,5)

## Sampling procedure
estimation

## Review by Roland Hischier 2007-08-13
passed
