# electricity production, oil, aluminium industry

Dataset: EcoSpold 2, unit process
Geography: IAI Area, EU27 & EFTA
Time period: 2015-01-01 to 2022-12-31
Technology level: current
Classification: ISIC rev.4 ecoinvent: 3510:Electric power generation, transmission and distribution
Classification: EcoSpold01Categories: hard coal/power plants
Tags: electricity, primary aluminium industry; re-labelling activity
Scenario: Business-as-Usual
System model: Substitution, consequential, long-term
Generated by: Pascal Lesage
Database: ecoinvent
isCopyrightProtected: true
accessRestrictedTo: 1

## General comment
This is a dataset used to create an aluminium industry specific electricity market for aluminium-producing countries within EU27 and EFTA (see Geography comment field for list of countries). The production volume represents the total amount of electricity from oil used in the region for aluminium production (electrolysis and ingot casting). The dataset also identifies the countries providing the electricity from oil fired power plants.
Electricity markets specific to the aluminium-industry are needed in an LCI database because primary aluminium production is very energy intensive, and hence the location of production plants is often determined by access to large amounts of cheap electricity, which often results in an electricity mix that is different from the general grid mix of the countries where the production plants are located.
It is assumed that the production of electricity in general and in aluminium industry specific power plants is identical. Details on actual electricity generation with each technology can be found in the corresponding datasets.
Calculations are based on statistics by the IAI (http://www.world-aluminium.org/statistics/)
Distribution of the total electricity production with oil in a specific area to the individual countries was calculated based on IEA statistics (IEA. 2010. Electricity information. IEA Statistics. International Energy Agency, Paris. ISBN 978-92-64-08418-6)

## Included activities start
Re-labelling dataset, not representing a real transformation activity. Conceptually, the activity can be said to start with the production of electricity.

## Included activities end
Re-labelling dataset, not representing a real transformation activity. Conceptually, the activity can be said to end with a given amount of high voltage electricity labelled as specifically used for the production of electricity.

## Geography
Aluminium producing European countries (FR, DE, GR, IS, IT, NL, NO, ES, SE, GB, BA, ME, RO, RU, SK, SI)

## Time period
Production volume updated with 2015 data from IAI

## Reference product
- electricity, high voltage, aluminium industry: 1 kWh; By-product classification allocatable product; CPC 17100: Electrical energy
  production volume 2.49167e8 kWh
  properties: carbon allocation 0 kg, carbon content 0, price 0.0977 EUR2005

## Inputs from technosphere
- electricity, high voltage: 0.040963, 0.088475, 0.0389613, 0.00893525, 0.115792, 0.27229, 0.00306627, 0.0157118, 0.00074549, 0.008652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 kWh (13 suppliers, which the file names only by identifier); sum of these 1 kWh; lognormal variance with pedigree 0.0033, pedigree (3,2,3,1,2)

## Sampling procedure
IAI data used for total electricity used in the production of aluminium that is from oil power plants. Data based on 97% of regional aluminium production.
