# enzymes production

Dataset: EcoSpold 2, unit process
Geography: RoW
Time period: 2015-01-01 to 2022-12-31
Technology level: current
Classification: ISIC rev.4 ecoinvent: 2011:Manufacture of basic chemicals
Synonyms: Alpha-amylase; Cellulase; Glucoamylase
Scenario: Business-as-Usual
System model: Substitution, consequential, long-term
Generated by: Lucia Valsasina
Database: ecoinvent
isCopyrightProtected: true
accessRestrictedTo: 1

## General comment
This activity represents the production of 1 kg of enzymes. In this activity we assume enzymes are produced from potato starch along with a bacterial strain. The bacterial strain is ommited leaving the enzyme production based only on potato starch as input. It is assumed that 4.16 kg of potato starch are needed to produce 1 kg of enzymes (Lages and Tannenbaum 2006). Heat and electricity required for the production are taken as the average of the values reported in Dunn et al. (2012) as inputs for the production of the following three enxymes: Alpha-amylase; Glucoamylase; Cellulase.
Reference(s):
Dunn et al. 2012. Energy consumption and greenhouse gas emissions from enzyme and yeast manufacture for corn and cellulosic ethanol production. Biotechnol Lett. DOI 10.1007/s10529-012-1057-6.
Ana C. A. Lages, Steven R. Tannenbaum, 2006, Production of Glucose from Tapioca (Cassava Starch) and Farinha de Mandioca (Cassava Meal). Journal of Food Science, DOI: 10.1111/j.1365-2621.1978.tb02474.x
For more information on the model please refer to the dedicate ecoinvent report, access it in the Report section of ecoQuery (http://www.ecoinvent.org/login-databases.html)

## Included activities start
The activity starts when the raw materials enter the process.

## Included activities end
Materials entering the process are included as well as energy uses, infrastructure and emissions.

## Geography
The majority of production of enzyme is located in Europe, see the production volume comment: 'Li et al. (2012) report in table 3 the location of the main producers of enzymes. Approximately 77% of the market share is covered by producers based in Europe.'. We therefore assume that the RER activity is relevant also as a GLO approximation.
Reference(s):
Li et al. 2012. Technology Prospecting on Enzymes: Application, Marketing and Engineering. Comput Struct Biotechnol J. 2012; 2: e201209017. Published online 2012 Nov 9. doi: 10.5936/csbj.201209017

## Time period
The energy data source is dated 2012 referring to 2009 data. This activity is therefore assumed to be valid for the time period from 2009 to 2020.

## Reference product
- enzymes: 1 kg; By-product classification allocatable product; CPC 34170: Ethers, alcohol peroxides, ether peroxides, epoxides, acetals and hemiacetals, and their halogenated, sulphona[…]
  production volume 1.61e10 kg
  properties: carbon allocation 0 kg, carbon content 0, carbon content, fossil 0, carbon content, non-fossil 0, dry mass 1 kg, price 15.1 EUR2005, water content 0, water in wet mass 0 kg, wet mass 1 kg

## Inputs from technosphere
- electricity, medium voltage: 0.600026, 0.0224501, 0.285236, 4.95061, 0.415691, 0.0222808 kWh (6 suppliers, which the file names only by identifier); sum of these 6.2963 kWh; lognormal variance with pedigree 0.009825, pedigree (2,3,2,2,3)
- heat, from steam, in chemical industry: 8.26667 MJ; lognormal variance with pedigree 0.009825, pedigree (2,3,2,2,3)
  properties: heating value, net 1 MJ
- potato starch: 4.16667 kg; lognormal variance with pedigree 0.0104, pedigree (2,3,2,4,3)
  properties: carbon content, non-fossil 0.46, dry mass 0.8 kg, heating value, net 10.66 MJ, water content 0.25, wet mass 1 kg

## Sampling procedure
Literature data.

## Extrapolations
This dataset is extrapolated from the european dataset. The uncertainty has been adjusted accordingly.

## Review by Emilia Moreno Ruiz 2017-08-10
This dataset was additionally reviewed in a separate review process by Eric Johnson of Atlantic Consulting as well as Emilia Moreno Ruiz and Gregor Wernet of ecoinvent.
