# uranium conversion facility construction

Dataset: EcoSpold 2, unit process
Geography: CN
Time period: 1980-01-01 to 2022-12-31
Technology level: current
Classification: ISIC rev.4 ecoinvent: 4290:Construction of other civil engineering projects
Classification: EcoSpold01Categories: nuclear power/power plants
Tags: ConvertedDataset
Scenario: Business-as-Usual
System model: Substitution, consequential, long-term
Generated by: Roberto Dones
Published in: Dones, R. 2007
Database: ecoinvent
isCopyrightProtected: true
accessRestrictedTo: 1

## General comment
Data for material and energy requirements for construction and decommissioning are from an old US study, which does not differentiate between dry and wet process. The material inventory may not correspond to currently Chinese operating facilities, which is taken into account in the uncertainties. The land use is based on actual data for the US Sequoyah facility. The lifetime is assumed to be 40 years with a throughput of 5000 t/a. Although Sequoyah was operating only for 22 years, 40 years can be assumed as an average for currently operating plants. Transport requirements recalculated either using ecoinvent standard distances for Europe (e.g. for chemicals) or given average distances by train from Chinese 2004 statistics or own assumptions. This dataset has been developed with the goal to serve a preliminary estimation of the Chinese nuclear chain for the Chinese electricity mix. Hence, it cannot be used for comparisons of conversion infrastrucure among countries.
[This dataset was already contained in the ecoinvent database version 2. It was not individually updated during the transfer to ecoinvent version 3. Life Cycle Impact Assessment results may still have changed, as they are affected by changes in the supply chain, i.e. in other datasets. This dataset was generated following the ecoinvent quality guidelines for version 2. It may have been subject to central changes described in the ecoinvent version 3 change report (http://www.ecoinvent.org/database/ecoinvent-version-3/reports-of-changes/), and the results of the central updates were reviewed extensively. The changes added e.g. consistent water flows and other information throughout the database. The documentation of this dataset can be found in the ecoinvent reports of version 2, which are still available via the ecoinvent website. The change report linked above covers all central changes that were made during the conversion process.]

## Included activities end
The module includes: land use of the factory; energy (electricity and diesel) and material requirements for the construction of the facility; transport requirements during construction; energy and transport requirements (for non-contaminated inerts concrete with reinforcing bars) during decommissioning; disposal of the non-contaminated inerts. The non contaminated metals are assumed to be recycled

## Geography
US data.

## Technology
Available construction material and energy data refer to conditions in early 1980s in USA.

## Reference product
- uranium conversion facility: 1 unit; By-product classification allocatable product; CPC 53269: Other constructions for manufacturing
  production volume 0.00101069 unit
  properties: carbon allocation 0 kg, carbon content 0, price 5.55598e7 EUR2005

## Inputs from technosphere
- aluminium, cast alloy: 11520 kg; lognormal variance with pedigree 0.12, pedigree (1,1,5,1,1)
  properties: dry mass 1 kg, wet mass 1 kg
- aluminium, wrought alloy: 24480 kg; lognormal variance with pedigree 0.12, pedigree (1,1,5,1,1)
  properties: dry mass 1 kg, wet mass 1 kg
- concrete, normal strength: 3710 m3; lognormal variance with pedigree 0.12, pedigree (1,1,5,1,1)
  properties: dry mass 2190 kg, water content 0.086758, wet mass 2380 kg
- copper, cathode: 110000 kg; lognormal variance with pedigree 0.12, pedigree (1,1,5,1,1)
  properties: dry mass 1 kg, wet mass 1 kg
- diesel, burned in diesel-electric generating set, 10MW: 2.8e9 MJ; lognormal variance with pedigree 0.12, pedigree (1,1,5,1,1)
  properties: heating value, net 1 MJ
- electricity, medium voltage: 1.28e6 kWh; lognormal variance with pedigree 0.12, pedigree (1,1,5,1,1)
- reinforcing steel: 64000 kg; lognormal variance with pedigree 0.12, pedigree (1,1,5,1,1)
  properties: carbon content, fossil 0.004, dry mass 1 kg, wet mass 1 kg
- steel, chromium steel 18/8, hot rolled: 1.85e6 kg; lognormal variance with pedigree 0.12, pedigree (1,1,5,1,1)
  properties: carbon content, fossil 0.0008, dry mass 1 kg, wet mass 1 kg
- steel, low-alloyed, hot rolled: 1.85e6 kg; lognormal variance with pedigree 0.12, pedigree (1,1,5,1,1)
  properties: carbon content, fossil 0.005, dry mass 1 kg, wet mass 1 kg
- waste reinforced concrete: -6e6 kg; lognormal variance with pedigree 0.04, pedigree (1,1,1,1,1)
  properties: dry mass 0.99418 kg, water content 0.00585407, wet mass 1 kg

## Inputs from nature
All rows: lognormal variance with pedigree 0.12, pedigree (1,1,5,1,1)
- Occupation, industrial area [natural resource, land]: 1.38e7 m2*year
- Transformation, from industrial area [natural resource, land]: 300000 m2
- Transformation, from unspecified [natural resource, land]: 300000 m2
- Transformation, to industrial area [natural resource, land]: 300000 m2
- Transformation, to unspecified [natural resource, land]: 300000 m2

## Sampling procedure
Literature

## Review by Rolf Frischknecht 2007-09-05
passed
