# tomato production, processing grade, open field

Dataset: EcoSpold 2, unit process
Geography: RoW
Time period: 2007-01-01 to 2022-12-31
Technology level: current
Classification: ISIC rev.4 ecoinvent: 0113:Growing of vegetables and melons, roots and tubers
Tags: WFLDB
Scenario: Business-as-Usual
System model: Substitution, consequential, long-term
Generated by: [System]
Database: ecoinvent
isCopyrightProtected: true
accessRestrictedTo: 1

## General comment
This dataset is a weighted average of the regional datasets, with weights based on production volume of the reference product. Detailed comments and sources about the exchanges can be found in the regional datasets.
The geographicalCorrelation score of every pedigree matrix of was changed to '5'.
Sum of regional production volumes: 1.865e+9 kg
IT: PV = 1.581e+9 kg; weight = 0.8475
ES: PV = 2.845e+8 kg; weight = 0.1525
Yield of the global dataset = 75881.2374434 kg/ha, calculated as a weighted average of the regional yields.
The comments below were part of the IT regional dataset.
This dataset represents the production of 1 kg of processing grade tomato. Processing grade tomatoes are used for industral processing into pulp, juice or paste. The reference flow is the average yield per ha and for the year 2011: yield (71 t/ha) obtained under irrigated conditions (total amount of water 1800 m3/ha). The data are representative for processing grade tomatoes, produced in Italy (Emilia Romagna) for the export market. Mineral NPK fertiliser input is 130-130-200 kg/ha. No organic fertilisers are applied. Total active ingredients (a.i.) applied as pesticides amount to 21.8 kg a.i./ha.
The dataset was modelled within the project 'World Food LCA database (WFLDB)'. The aim of this project was to provide inventories of a broad variety of agricultural products and processes and to cover for each product at least 50% of the global export market. The export share of processing grade tomatoes produced in Italy amounts to 78 % of the global export (tonnage exported in 2010). The production system regarded in this dataset aimed at representing processing grade tomatoes produced in Italy for the export market.
PEF-Quality: data quality rating (DQR) = 2.0 (i.e. very good quality). This dataset refers to an average situation; for specific situations exchanges might differ substantially due to site specific parameters

## Included activities start
This activity starts with soil cultivation after the harvest of the previous crop.

## Included activities end
This activity ends with harvest and transport to the farm gate. Storage is not included.
The dataset includes all activities during a cycle, i.e. all machine operations, corresponding infrastructure, fuel use and sheds. Machine operations include: soil cultivation, fertilisation, pesticide application, harvesting, and on-farm transport. Further, direct field emissions and land use change are included. Irrigation is included. The inputs of seedlings, fertilisers and pesticides as well as packaging of fertilisers and pesticides are considered. Heavy metal uptake by the crop is considered.

## Reference product
- tomato, processing grade: 1 kg; By-product classification allocatable product; CPC 01234: Tomatoes
  production volume 3.81244e9 kg
  properties: carbon allocation 0.197361 kg, carbon content 0.383276, carbon content, fossil 0, carbon content, non-fossil 0.383276, dry mass 0.514933 kg, price 1.09 EUR2005, water content 0.942, water in wet mass 0.485067 kg, wet mass 1 kg

## Inputs from technosphere
- ammonia, anhydrous, liquid: 8.10493e-8, 3.98356e-7, 7.73291e-7, 8.57144e-6, 2.39932e-7, 3.6232e-7, 2.97871e-6, 7.89286e-7 kg (8 suppliers, which the file names only by identifier); sum of these 1.41944e-5 kg; lognormal variance with pedigree 0.118177, pedigree (2,1,4,5,1)
  properties: dry mass 1 kg, wet mass 1 kg
- ammonium nitrate: 0.00011538, 4.42973e-5, 3.40472e-5 kg (3 suppliers, which the file names only by identifier); sum of these 0.000193724 kg; lognormal variance with pedigree 0.118177, pedigree (2,1,4,5,1)
  properties: dry mass 1 kg, wet mass 1 kg
- ammonium sulfate: 8.75034e-5 kg; lognormal variance with pedigree 0.118177, pedigree (2,1,4,5,1)
  properties: dry mass 1 kg, wet mass 1 kg
- diesel, burned in agricultural machinery: 0.256036 MJ; lognormal variance with pedigree 0.118177, pedigree (2,1,4,5,1)
- inorganic nitrogen fertiliser, as N: 0.000108938, 1.16914e-7, 4.30399e-8, 4.55516e-6, 1.07857e-6, 2.95112e-6, 2.94277e-6, 7.90135e-7, 1.42096e-6, 1.37856e-7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 kg (63 suppliers, which the file names only by identifier); sum of these 0.00129515 kg; lognormal variance with pedigree 0.118177, pedigree (2,1,4,5,1)
  properties: dry mass 1 kg, wet mass 1 kg
- inorganic phosphorus fertiliser, as P2O5: 1.61168e-6, 9.90203e-7, 5.067e-6, 2.16391e-7, 5.36649e-7, 7.32266e-6, 1.09078e-5, 8.90664e-6, 1.09061e-7, 7.08896e-8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 kg (63 suppliers, which the file names only by identifier); sum of these 0.0015434 kg; lognormal variance with pedigree 0.118177, pedigree (2,1,4,5,1)
  properties: dry mass 1 kg, wet mass 1 kg
- inorganic potassium fertiliser, as K2O: 1.15478e-7, 0.000158906, 1.69874e-5, 2.43719e-6, 0.000177866, 1.43527e-5, 0.00114974, 1.82333e-6, 8.26577e-6, 1.23683e-6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 kg (63 suppliers, which the file names only by identifier); sum of these 0.00221368 kg; lognormal variance with pedigree 0.118177, pedigree (2,1,4,5,1)
  properties: dry mass 1 kg, wet mass 1 kg
- irrigation: 0.0318576 m3; lognormal variance with pedigree 0.118177, pedigree (2,1,4,5,1)
  properties: dry mass 0.11 kg, water content 9089.91, wet mass 1000 kg
- packaging, for fertilisers: 0.0140493 kg; lognormal variance with pedigree 0.0512, pedigree (4,3,4,5,4)
  properties: carbon content, fossil 0.825301, dry mass 1 kg, heating value, net 25.01 MJ, price 0.0642 EUR2005, wet mass 1 kg
- packaging, for pesticides: 0.000578221 kg; lognormal variance with pedigree 0.0512, pedigree (4,3,4,5,4)
  properties: carbon content, fossil 0.85714, dry mass 1 kg, heating value, net 25.97 MJ, price 0.0642 EUR2005, wet mass 1 kg
- pesticide, unspecified: 0.00028911 kg; lognormal variance with pedigree 0.00784984, pedigree (2,2,4,5,1)
  properties: carbon content, fossil 0.486978, dry mass 1 kg, wet mass 1 kg
- phosphate rock, beneficiated: 2.52837e-5, 3.35662e-7, 3.35662e-7 kg (3 suppliers, which the file names only by identifier); sum of these 2.5955e-5 kg; lognormal variance with pedigree 0.118177, pedigree (2,1,4,5,1)
  properties: dry mass 1 kg, wet mass 1 kg
- potassium chloride: 0.00145501 kg; lognormal variance with pedigree 0.118177, pedigree (2,1,4,5,1)
  properties: dry mass 1 kg, wet mass 1 kg
- potassium sulfate: 0.000769887 kg; lognormal variance with pedigree 0.118177, pedigree (2,1,4,5,1)
  properties: dry mass 1 kg, wet mass 1 kg
- tomato seedling, for planting: 0.439889 unit; lognormal variance with pedigree 0.118177, pedigree (2,1,4,5,1)
  properties: carbon content, non-fossil 0.439481, dry mass 0.578035 kg, water content 0.73, wet mass 1 kg
- urea: 0.000424504, 6.28715e-5, 0.000497118 kg (3 suppliers, which the file names only by identifier); sum of these 0.000984494 kg; lognormal variance with pedigree 0.118177, pedigree (2,1,4,5,1)
  properties: carbon content, fossil 0.2, dry mass 1 kg, wet mass 1 kg

## Inputs from nature
- Carbon dioxide, in air [natural resource, in air]: 0.100525 kg; lognormal variance with pedigree 0.00784984, pedigree (2,2,4,5,1)
- Energy, gross calorific value, in biomass [natural resource, biotic]: 0.903648 MJ; lognormal variance with pedigree 0.00784984, pedigree (2,2,4,5,1)
- Occupation, annual crop [natural resource, land]: 0.134533 m2*year; lognormal variance with pedigree 0.0140616, pedigree (2,1,4,5,1)
- Transformation, from arable land, unspecified use [natural resource, land]: 0.13417 m2; lognormal variance with pedigree 0.0382144, pedigree (2,1,4,5,1)
- Transformation, to arable land, unspecified use [natural resource, land]: 0.13417 m2; lognormal variance with pedigree 0.0382144, pedigree (2,1,4,5,1)

## Emissions to nature
- Ammonia [air, non-urban air or from high stacks]: 0.000136676 kg; lognormal variance with pedigree 0.0387216, pedigree (2,2,4,5,1)
- Carbon dioxide, fossil [air, non-urban air or from high stacks]: 0.00108148 kg; lognormal variance with pedigree 0.00784984, pedigree (2,2,4,5,1)
- Carbon dioxide, from soil or biomass stock [air, non-urban air or from high stacks]: 0.0178555 kg; normal variance with pedigree 0.5072, pedigree (3,3,5,5,2)
- Dinitrogen monoxide [air, non-urban air or from high stacks]: 3.79252e-5 kg; lognormal variance with pedigree 0.118664, pedigree (2,2,4,5,1)
- Nitrogen oxides [air, non-urban air or from high stacks]: 5.10393e-5 kg; lognormal variance with pedigree 0.118664, pedigree (2,2,4,5,1)
- Water [air, non-urban air or from high stacks]: 0.0286665 m3; lognormal variance with pedigree 0.118177, pedigree (2,1,4,5,1)
- Cadmium II [soil, agricultural]: 9.08298e-8 kg
- Chromium III [soil, agricultural]: 7.58325e-7 kg
- Copper ion [soil, agricultural]: -2.52773e-7 kg
- Fungicides, unspecified [soil, agricultural]: 0.000214849 kg; lognormal variance with pedigree 0.0387216, pedigree (2,2,4,5,1)
- Herbicides, unspecified [soil, agricultural]: 3.81954e-5 kg; lognormal variance with pedigree 0.0387216, pedigree (2,2,4,5,1)
- Insecticides, unspecified [soil, agricultural]: 7.16165e-6 kg; lognormal variance with pedigree 0.0387216, pedigree (2,2,4,5,1)
- Lead II [soil, agricultural]: 1.05502e-7 kg
- Mercury II [soil, agricultural]: -5.8881e-10 kg
- Nickel II [soil, agricultural]: 8.49986e-8 kg
- Pesticides, unspecified [soil, agricultural]: 2.89039e-5 kg; lognormal variance with pedigree 0.0387216, pedigree (2,2,4,5,1)
- Zinc II [soil, agricultural]: -3.98791e-7 kg
- Cadmium II [water, ground-]: 5.62958e-10 kg; lognormal variance with pedigree 0.350938, pedigree (2,2,4,5,1)
- Cadmium II [water, surface water]: 8.07789e-10 kg; lognormal variance with pedigree 0.350938, pedigree (2,2,4,5,1)
- Chromium III [water, ground-]: 2.62625e-7 kg; lognormal variance with pedigree 0.350938, pedigree (2,2,4,5,1)
- Chromium III [water, surface water]: 8.46064e-8 kg; lognormal variance with pedigree 0.350938, pedigree (2,2,4,5,1)
- Copper ion [water, ground-]: 4.32887e-8 kg; lognormal variance with pedigree 0.350938, pedigree (2,2,4,5,1)
- Copper ion [water, surface water]: 1.25396e-7 kg; lognormal variance with pedigree 0.350938, pedigree (2,2,4,5,1)
- Lead II [water, ground-]: 3.2899e-9 kg; lognormal variance with pedigree 0.350938, pedigree (2,2,4,5,1)
- Lead II [water, surface water]: 3.53443e-8 kg; lognormal variance with pedigree 0.350938, pedigree (2,2,4,5,1)
- Mercury II [water, ground-]: 1.28078e-11 kg; lognormal variance with pedigree 0.350938, pedigree (2,2,4,5,1)
- Mercury II [water, surface water]: 2.06598e-10 kg; lognormal variance with pedigree 0.350938, pedigree (2,2,4,5,1)
- Nickel II [water, surface water]: 6.29293e-8 kg; lognormal variance with pedigree 0.350938, pedigree (2,2,4,5,1)
- Nitrate [water, ground-]: 0.00300176 kg; lognormal variance with pedigree 0.169866, pedigree (2,2,4,5,1)
- Phosphate [water, ground-]: 2.886e-6 kg; lognormal variance with pedigree 0.169866, pedigree (2,2,4,5,1)
- Phosphate [water, surface water]: 9.30121e-6 kg; lognormal variance with pedigree 0.169866, pedigree (2,2,4,5,1)
- Phosphorus [water, surface water]: 2.48137e-6 kg; lognormal variance with pedigree 0.169866, pedigree (2,2,4,5,1)
- Water [water, ground-]: 0.000637151 m3; lognormal variance with pedigree 0.118177, pedigree (2,1,4,5,1)
- Water [water, surface water]: 0.00254861 m3; lognormal variance with pedigree 0.118177, pedigree (2,1,4,5,1)
- Zinc II [water, ground-]: 2.62181e-7 kg; lognormal variance with pedigree 0.350938, pedigree (2,2,4,5,1)
- Zinc II [water, surface water]: 1.46066e-7 kg; lognormal variance with pedigree 0.350938, pedigree (2,2,4,5,1)

## Sampling procedure
WFLDB Methodological Guidelines for the Life Cycle Inventory of Agricultural Products in the latest version, available at: https://ecoquery.ecoinvent.org/File/Reports. Data sources: Data were categorised from level 0 (L0) to level (L4) as follows: L0 = estimate, proxy; L1 = statistical data (e.g. FAOSTAT); L2 = L1 adapted to crop and country; L3 = literature data or L1 resp. L2 data approved by experts; medium detailing (i.e. kg of total N-fertiliser); L4 = L3 data of high detailing (i.e. portion N-fertiliser types).In this dataset data were obtained for yield: L3; Fertilisers: L4; Pesticides: L1; Machinery: L0; Irrigation: L2. For information regarding the calculation of individual exchanges see supporting documentation WFLDB-Documentation.pdf

## Extrapolations
The amount of the exchanges are weighted average of regional datasets.

## Review by Assumpció ANTON 2016-05-30
Be aware that the use of statistics in input calculations could provide some specific inputs not common for specific crops, this should be corrected if better information is available and better reflexed in DQR . Currently, I would dissent for some of good marks provided, being a revision of criteria applied advisable.
Pesticides will need to be amended periodically checking for update of pesticides' ban.
