# mine construction, gold

Dataset: EcoSpold 2, unit process
Geography: AU
Time period: 2001-01-01 to 2022-12-31
Technology level: current
Classification: ISIC rev.4 ecoinvent: 4290:Construction of other civil engineering projects
Classification: EcoSpold01Categories: metals/extraction
Tags: ConvertedDataset
Scenario: Business-as-Usual
System model: Substitution, consequential, long-term
Generated by: Matthias Tuchschmid (obsolete)
Published in: Classen M. 2009
Database: ecoinvent
isCopyrightProtected: true
accessRestrictedTo: 1

## General comment
This dataset describes the production of 1 unit of gold mine infrastructure. It includes land use and buildings and machinery consumption, as in open pit and underground mining. Data corresponds to Australian mines Kalgoorlie, Jundee, Tanami and Pajingo, which produce only gold. Tanami and Pajingo are underground mines, Kalgoorlie is an open pit mine, and Jundee is both an open pit and underground mine.
[This dataset was already contained in the ecoinvent database version 2. It was not individually updated during the transfer to ecoinvent version 3. Life Cycle Impact Assessment results may still have changed, as they are affected by changes in the supply chain, i.e. in other datasets. This dataset was generated following the ecoinvent quality guidelines for version 2. It may have been subject to central changes described in the ecoinvent version 3 change report (http://www.ecoinvent.org/database/ecoinvent-version-3/reports-of-changes/), and the results of the central updates were reviewed extensively. The changes added e.g. consistent water flows and other information throughout the database. The documentation of this dataset can be found in the ecoinvent reports of version 2, which are still available via the ecoinvent website. The change report linked above covers all central changes that were made during the conversion process.]

## Included activities start
From unoccupied land foreseen for a gold mine.

## Included activities end
This activity ends with the transformation of occupied land, in time.

The dataset includes land transformation and occupation during the different stages of the mine, as well as the consumption of buildings and machinery for open pit and underground mining.

## Geography
Land use of Australian mine, other inputs based on rough assumptions.

## Technology
The mine is foreseen to have a lifetime of 50 years.

## Time period
Period of public environmental report

## Reference product
- mine infrastructure, gold: 1 unit; By-product classification allocatable product; CPC 53261: Mining constructions
  production volume 0.0912887 unit
  properties: carbon allocation 0 kg, carbon content 0, price 3.38664e7 EUR2005

## Inputs from technosphere
- building, hall: 15000 m2; lognormal variance with pedigree 0.318, pedigree (4,5,5,5,5)
- building, multi-storey: 275000 m3; lognormal variance with pedigree 0.318, pedigree (4,5,5,5,5)
- conveyor belt: 6000 m; lognormal variance with pedigree 0.318, pedigree (4,5,5,5,5)
- industrial machine, heavy, unspecified: 650000 kg; lognormal variance with pedigree 0.318, pedigree (4,5,5,5,5)

## Inputs from nature
- Occupation, mineral extraction site [natural resource, land]: 1.6654e9 m2*year; lognormal variance with pedigree 0.0406, pedigree (1,3,5,1,1)
- Transformation, from mineral extraction site [natural resource, land]: 5.995e7 m2; lognormal variance with pedigree 0.1206, pedigree (1,3,5,1,1)
- Transformation, from unspecified [natural resource, land]: 5.995e7 m2; lognormal variance with pedigree 0.1206, pedigree (1,3,5,1,1)
- Transformation, to heterogeneous, agricultural [natural resource, land]: 2.0828e7 m2; lognormal variance with pedigree 0.1206, pedigree (1,3,5,1,1)
- Transformation, to mineral extraction site [natural resource, land]: 5.995e7 m2; lognormal variance with pedigree 0.1206, pedigree (1,3,5,1,1)
- Transformation, to unspecified [natural resource, land]: 3.9123e7 m2; lognormal variance with pedigree 0.1206, pedigree (1,3,5,1,1)

## Sampling procedure
environmental report

## Extrapolations
Buildings and machinery are based on global assumptions. The figures are extrapolated on the basis of the ore production.

## Review by Roberto Dones 2007-09-20
passed
none

## Review by Roland Hischier 2011-09-19
Transfer of documentation done.
