# plaster mixing

Dataset: EcoSpold 2, unit process
Geography: RoW
Time period: 2001-01-01 to 2022-12-31
Technology level: current
Classification: ISIC rev.4 ecoinvent: 2394:Manufacture of cement, lime and plaster
Classification: EcoSpold01Categories: mortar and plaster/production
Tags: ConvertedDataset
Scenario: Business-as-Usual
System model: Substitution, consequential, long-term
Generated by: Daniel Kellenberger (obsolete)
Published in: Kellenberger D. 2004
Database: ecoinvent
isCopyrightProtected: true
accessRestrictedTo: 1

## General comment
Only the mixing process is taken into account; no mortar and water are included
[This dataset was already contained in the ecoinvent database version 2. It was not individually updated during the transfer to ecoinvent version 3. Life Cycle Impact Assessment results may still have changed, as they are affected by changes in the supply chain, i.e. in other datasets. This dataset was generated following the ecoinvent quality guidelines for version 2. It may have been subject to central changes described in the ecoinvent version 3 change report (http://www.ecoinvent.org/database/ecoinvent-version-3/reports-of-changes/), and the results of the central updates were reviewed extensively. The changes added e.g. consistent water flows and other information throughout the database. The documentation of this dataset can be found in the ecoinvent reports of version 2, which are still available via the ecoinvent website. The change report linked above covers all central changes that were made during the conversion process.]

## Included activities end
Includes an estimated amount of electricity and infrastructure for the mixing of the plaster/mortar with water at the site of use. No other requirements are included.

## Technology
Assumed average current technology

## Reference product
- plaster mixing: 1 kg; By-product classification allocatable product; CPC 88535: Cement, lime and plaster manufacturing services
  production volume 3.94856 kg
  properties: carbon allocation 0 kg, carbon content 0, price 0.00810952 EUR2005

## Inputs from technosphere
- electricity, medium voltage: 0.00687548, 0.000713915, 0.00127318, 0.000257247, 0.00326841, 0.00691867, 0.0567272, 0.000255307, 0.00371055 kWh (9 suppliers, which the file names only by identifier); sum of these 0.08 kWh; lognormal variance with pedigree 1.332, pedigree (1,1,5,5,1)
- industrial machine, heavy, unspecified: 0.0002 kg; lognormal variance with pedigree 1.332, pedigree (1,1,5,5,1)

## Sampling procedure
estimation

## Extrapolations
This dataset has been copied from an original dataset covering the geography CH. The uncertainty has been adjusted accordingly.

## Review by Roberto Dones 2004-04-01
passed
