# cement production, CP II-Z

Dataset: EcoSpold 2, unit process
Geography: BR
Time period: 2016-01-01 to 2022-12-31
Technology level: current
Classification: ISIC rev.4 ecoinvent: 2394:Manufacture of cement, lime and plaster
Synonyms: composite cement; CP II-Z; blended cement
Tags: combined production
Scenario: Business-as-Usual
System model: Substitution, consequential, long-term
Share of production covered: 70 %
Generated by: Fernanda Belizario Silva
Published in: Silva, F. B. 2017
Database: ecoinvent
isCopyrightProtected: true
accessRestrictedTo: 1

## General comment
The dataset describes the production of blended Portland cement production with the addition of pozzolan material in Brazil. There are three types of blended cement in Brazil (CP II) depending on the supplementary cementitious materials (SCM): slag (E), pozzolan (Z) and limestone filler (F). CP II-Z has between 6% to 14% of pozzolan in mass composition. The three Blended cement types are specified by Brazilian standards (ABNT NBR 11578:1991).
The Pozzolan is a siliceous material with no (or low) cementing property, but when finely ground and in the presence of water, reacts with the calcium hydroxide produced by clinker"s hydration to form a cementing material. The pozzolanic reaction is slow compared with Ordinary Portland cement hydration; therefore, heat liberation and strength development are slow in concrete. The pozzolanic reaction is very efficient in filling up concrete pores, improving strength and impermeability of concrete. Pozzolans can be natural materials, such as volcanic stones with natural pozzolanic activity/; or artificial materials, including manufactured products (e.g. calcined clay) or byproducts from other industries (e.g. fly ash from coal thermal power plants).
Six types of Portland and blended cement types represent Brazilian production. The table below presents the different cement types and compositions according to Brazilian standards (NBR 11578:1991, NBR 5735:1991, NBR 5736:1991, NBR 5733:1991).
The CP II cement types are the most consumed cement in Brazil. CP II represents 62.1% of the market according to the National Union of the Cement Industry (SNIC, 2013). Its applications range from reinforced and ordinary concrete to coating mortars. This cement provides a slower rate of hydration heat emission than ordinary Portland Cement. Properties attained by using low pozzolanic content in concrete are less permeability, ionic diffusivity, capillary porosity, which increase stability and durability. The CP II-Z cement consists of clinker, calcium sulfate, milled limestone and 6-14% pozzolana and fly ash. (see composition in the table).
This dataset contains information from clinker stockpile to cement ready to be shipped in bulk. After the clinker is cooled from the rotary kiln, it is ground in ball or roller mills to particles under 75 μm size. Then it goes to silos where it is mixed with calcium sulphate (gypsum) and SCMs. The mixed cement goes to a finishing mill and then it is stored in cement silos, ready to be shipped in bulk or packed.
This dataset uses “hard coal ash” as a proxy for fly ash, "silica sand" as a proxy for natural pozzolans and "nickel smelter slag" as a proxy for slags from metallurgical processes of nickel, copper and manganese.

## Included activities start
The activity starts with the reception of raw materials in the cement plant. In plants which are integrated with clinker production, clinker is stored in the silo after cooling in the upstream process (clinker production /BR).

## Included activities end
The activity includes the drying of raw materials, the grinding and mixing of raw materials for cement production in the cement mill (with grinding aids) and ends with cement stored in silos, ready to be shipped. Waste or particulate emission are not considered due to the lack of data. The dataset does not include packaging and administration.

## Geography
This dataset represents production of cement blended with pozzolan 6-14% for Brazil.

## Technology
Current technology for cement production in Brazil.

## Time period
Time period corresponds to data collection period (2016).

## Reference product
- cement, CP II-Z: 1 kg; By-product classification allocatable product; CPC 37440: Portland cement, aluminous cement, slag cement and similar hydraulic cements, except in the form of clinkers; EcoSpold01Categories construction materials/binder
  production volume 1.12608e10 kg
  properties: carbon allocation 0 kg, carbon content 0, carbon content, fossil 0, carbon content, non-fossil 0, dry mass 1 kg, price 0.0615 EUR2005, water content 0, water in wet mass 0 kg, wet mass 1 kg

## Inputs from technosphere
- calcined clay: 0.03 kg; lognormal variance with pedigree 1.3447, pedigree (2,2,1,1,1)
  properties: dry mass 1 kg, wet mass 1 kg
- cement factory: 2.73e-11 unit; lognormal variance with pedigree 0.314, pedigree (3,5,3,5,1)
- clinker: 0.74 kg; lognormal variance with pedigree 0.0012, pedigree (2,2,1,1,1)
  properties: dry mass 1 kg, wet mass 1 kg
- diethylene glycol: 0.000247 kg; lognormal variance with pedigree 0.1867, pedigree (2,2,1,1,1)
  properties: carbon content, fossil 0.45283, dry mass 1 kg, heating value, net 25.14 MJ, wet mass 1 kg
- electricity, medium voltage: 0.051 kWh; lognormal variance with pedigree 0.0217, pedigree (2,2,1,1,1)
- gypsum, mineral: 0.04 kg; lognormal variance with pedigree 0.0497, pedigree (2,2,1,1,1)
  properties: dry mass 1 kg, wet mass 1 kg
- heat, district or industrial, natural gas: 0.00503 MJ; lognormal variance with pedigree 3.0977, pedigree (2,2,1,1,1)
  properties: heating value, net 1 MJ
- heat, district or industrial, other than natural gas: 0.0155 MJ; lognormal variance with pedigree 2.2227, pedigree (2,2,1,1,1)
  properties: corresponding fuel use, propane, furnace >100kW 1.05263 MJ, heating value, net 1 MJ
- limestone, crushed, for mill: 0.1 kg; lognormal variance with pedigree 0.0047, pedigree (2,2,1,1,1)
  properties: carbon content, fossil 0.117492, dry mass 1 kg, wet mass 1 kg
- lubricating oil: 5.5e-6 kg; lognormal variance with pedigree 0.5017, pedigree (2,2,1,1,1)
  properties: carbon content, fossil 0.75, dry mass 1 kg, heating value, net 40.2 MJ, wet mass 1 kg
- scrap steel: -7.1e-5 kg; lognormal variance with pedigree 0.4057, pedigree (2,2,1,1,1)
  properties: carbon content, fossil 0.005, dry mass 1 kg, wet mass 1 kg
- silica sand: 0.02 kg; lognormal variance with pedigree 0.8227, pedigree (2,2,1,1,1)
  properties: dry mass 0.99 kg, water content 0.010101, wet mass 1 kg
- steel, low-alloyed: 7.1e-5 kg; lognormal variance with pedigree 0.4057, pedigree (2,2,1,1,1)
  properties: carbon content, fossil 0.005, dry mass 1 kg, wet mass 1 kg
- synthetic rubber: 8.8e-6 kg; lognormal variance with pedigree 0.6667, pedigree (2,2,1,1,1)
  properties: carbon content, fossil 0.871949, dry mass 1 kg, heating value, net 26.42 MJ, wet mass 1 kg
- tap water: 0.00145 kg; lognormal variance with pedigree 0.6787, pedigree (2,2,1,1,1)
  properties: carbon content, fossil 0.00178991, dry mass 0.000337476 kg, water content 2962.17, wet mass 1 kg
- waste mineral oil: -5.5e-6 kg; lognormal variance with pedigree 0.5017, pedigree (2,2,1,1,1)
  properties: carbon content, fossil 0.864444, dry mass 0.9 kg, heating value, net 34.7 MJ, water content 0.111111, wet mass 1 kg
- waste rubber, unspecified: -8.8e-6 kg; lognormal variance with pedigree 0.6667, pedigree (2,2,1,1,1)
  properties: carbon content, fossil 0.853, dry mass 1 kg, heating value, net 27.19 MJ, wet mass 1 kg
- wastewater, average: -1.45e-6 m3; lognormal variance with pedigree 0.6787, pedigree (2,2,1,1,1)
  properties: carbon content, non-fossil 0.194039, dry mass 0.346837 kg, water content 2882.2, wet mass 1000 kg
- water, harvested from rainwater: 0.00397 kg; lognormal variance with pedigree 1.6297, pedigree (2,2,1,1,1)
  properties: carbon content, fossil 0.0017899, dry mass 0.00034 kg, water content 2940.18, wet mass 1 kg

## Inputs from nature
- Water, river [natural resource, in water]: 0.000124 m3; lognormal variance with pedigree 0.2747, pedigree (2,2,1,1,1)
- Water, unspecified natural origin [natural resource, in water]: 2.03e-6 m3; lognormal variance with pedigree 1.7167, pedigree (2,2,1,1,1)
- Water, well, in ground [natural resource, in water]: 5.65e-5 m3; lognormal variance with pedigree 0.4147, pedigree (2,2,1,1,1)

## Emissions to nature
- Water [air, unspecified]: 0.000187 m3; lognormal variance with pedigree 0.1067, pedigree (2,2,1,1,1)

## Sampling procedure
Data represent circa 70% of the Brazilian cement production in 2016, which is considered a good representativeness level. Data were provided by six cement manufacturers, via confidential questionnaires, regarding the production of cement during the year of 2016. Raw materials flows are the weighted average of the cement composition informed by each cement manufacturer. The weighing factor used is the total cement production volume, since manufacturers did not report the production volumes of each cement type due to confidentiality. Basic uncertainty was calculated based on the sample"s weighted standard deviation and represents variation of composition between manufacturers/factories. For other input flows (grinding aids, materials for equipment maintenance, fuels, electricity, water consumption), the weighted average of each manufacturer"s unit flows was calculated. Except for the grinding aids, all other flows are not distinguished by cement type, as their consumption is reported for the whole cement plant, which usually produces more than one cement type. Water consumption was usually reported for the whole integrated cement plants (clinker + cement production operations). Based on literature and expert opinion, the total water volume was divided equally between the clinker and the cement production processes and then converted into unit flows. Raw materials and fuel inputs were considered to be dry. As water is mainly used for cooling and dust control, it was considered that all water evaporates, except for the "tap water" input, which was considered to be used as drinking water and whose output is modelled as an effluent. Fuel consumption was informed by manufacturers in terms of volume or mass. They were converted into energy using their lower heating values and modelled as a heat input, to simplify the dataset and allow the consideration of corresponding air emissions. Infrastructure input flow (cement factory) was extrapolated from "cement Portland/CH" dataset (accessed 08.10.2017). The amounts of the exchanges were calculated considering the weighted average of the sample. No conversion to the geometric mean of the lognormal distribution was done, for consistency reasons with other ecoinvent datasets.

## Extrapolations
Data represent 70% of Brazilian cement production. This sample is extrapolated to represent the production in the whole country. The main values are considered representative for a typical production of Portland cement blended with pozolan in Brazil.
