# concrete production, 37MPa, for civil engineering, for deicing salt contact, with cement ZN/D

Dataset: EcoSpold 2, unit process
Geography: CH
Time period: 2020-01-01 to 2022-12-31
Technology level: modern
Classification: ISIC rev.4 ecoinvent: 2395:Manufacture of articles of concrete, cement and plaster
Classification: EcoSpold01Categories: construction materials/concrete
Synonyms: Tiefbaubeton; ready-mixed concrete; Transportbeton
Scenario: Business-as-Usual
System model: Substitution, consequential, long-term
Generated by: Frank Werner
Published in: Werner F. 2014
Database: ecoinvent
isCopyrightProtected: true
accessRestrictedTo: 1

## General comment
This dataset contains the production of concrete used in civil engineering with cement Susteno (technical abbreviation according to SIA 2049: ZN/D) by Holcim Switzerland from primary aggregates (no input of recycled gravel or sand). This concrete is humidified and in its application contains reinforcement steel or other metals. It is exposed to air and humidity as well as forst-dew cycles and chloride-containing water/deicing agents (spray mist).
Density: 2400 kg/m3, content of cement: 310 kg/m3
Exposition class according to SN EN 206: XC4, XD3, XF4
Examples of this exposition class are vertical or horizontal esterior building parts under direct weathering (exposed to rain, frost, deicing agents (as spray mist) such as construction elements of bridges with spray water, concrete ceilings, park decks, sole bathes.
This dataset is a copy of the existing data set for concrete production, for civil engineering, in Switzerland; the original type of cement has been replaced by the cement Susteno.

## Included activities start
The activity starts with the ingredients for the concrete at the factory gate.

## Included activities end
Includes the whole manufacturing processes to produce ready-mixed concrete, internal processes (transport, etc.) and infrastructure. No administration is included.

## Geography
For some exchanges RER-modules have been used as proxy

## Technology
New development of a resource saving, low carbon concrete by Holcim Switzerland
The cement Susteno is made of processed mixed granulate from demolition projects as a major additive. The cement Susteno reduces the clinker content of the cement and contributes to a closed material cycle.

## Parameters
- fraction, process water, to air: 0.15 dimensionless; name fraction_PW_to_air; lognormal variance with pedigree 0.092025, pedigree (4,4,3,2,4)
  Literature value. In case when no industry/process specific data are available, default evaporation fraction value is used. This value is 15% and is based on literature (Statistics Canada, 2007 & Shaffer, K.H., 2008, Consumptive water use in the Great Lakes Basin, USGS & Shiklomanov, 2003, World Water Resources at the Beginning of the 21st Century) and has been approved by an expert.
- fraction, tap water, to air: 0.15 dimensionless; name fraction_TW_to_air; = fraction_PW_to_air; lognormal variance with pedigree 0.092025, pedigree (4,4,3,2,4)
  Calculated value. See comment in the other parametres present in this dataset. Tap water is considered to be always used as process water, thus process water fractions to air are applied to all tap water input flows to calculate the amount of water consumed in the processes.
- fraction, water, completely softened, to air: 0.15 dimensionless; name fraction_WCS_to_air; = fraction_PW_to_air; lognormal variance with pedigree 0.092025, pedigree (4,4,3,2,4)
  Calculated value. See comment in the other parametres present in this dataset. Water, completely softened is considered to be always used as process water, thus process water fractions to air are applied to all water, completely softened input flows to calculate the amount of water consumed in the processes.

## Reference product
- concrete, 37MPa: 1 m3; By-product classification allocatable product; CPC 37510: Non-refractory mortars and concretes
  production volume 1 m3
  properties: carbon allocation 0 kg, carbon content 0, carbon content, fossil 0, carbon content, non-fossil 0, dry mass 2305 kg, price 191 EUR2005, water content 0.0650759, water in wet mass 150 kg, wet mass 2455 kg

## Inputs from technosphere
- cement, ZN/D, new alternative constituents 36-50%, in conformity with SIA 2049: 330 kg; lognormal variance with pedigree 0.014, pedigree (4,1,3,1,1)
  properties: dry mass 1 kg, wet mass 1 kg
- concrete mixing factory: 4.17e-7 unit; lognormal variance with pedigree 0.3206, pedigree (2,1,2,1,1)
- diesel, burned in building machine: 0.5 MJ; lognormal variance with pedigree 0.010625, pedigree (2,1,2,2,1)
  properties: heating value, net 1 MJ
- electricity, medium voltage: 4.9 kWh; lognormal variance with pedigree 0.0106, pedigree (2,1,2,1,1)
- gravel, round: 1240 kg; lognormal variance with pedigree 0.0181, pedigree (4,2,2,1,1)
  properties: dry mass 1 kg, wet mass 1 kg
- heat, district or industrial, natural gas: 8.8 MJ; lognormal variance with pedigree 0.024025, pedigree (3,4,2,2,1)
  properties: heating value, net 1 MJ
- heat, district or industrial, other than natural gas: 9.5 MJ; lognormal variance with pedigree 0.024025, pedigree (3,4,2,2,1)
  properties: heating value, net 1 MJ
- lubricating oil: 0.02 kg; lognormal variance with pedigree 0.010625, pedigree (2,1,2,2,1)
  properties: carbon content, fossil 0.75, dry mass 1 kg, heating value, net 40.2 MJ, wet mass 1 kg
- municipal solid waste: -0.05 kg; lognormal variance with pedigree 0.0106, pedigree (2,1,1,1,1)
  properties: carbon content, fossil 0.171549, carbon content, non-fossil 0.261655, dry mass 0.771 kg, heating value, net 11.74 MJ, water content 0.297017, wet mass 1 kg
- plasticiser, for concrete, based on sulfonated melamine formaldehyde: 2 kg; lognormal variance with pedigree 0.014, pedigree (4,1,3,1,1)
  properties: heating value, net 5.99 MJ
- polycarboxylates, 40% active substance: 1 kg; lognormal variance with pedigree 0.014, pedigree (4,1,3,1,1)
  properties: carbon content, fossil 0.496429, dry mass 0.4 kg, heating value, net 4.54 MJ, water content 1.5, wet mass 1 kg
- sand: 697 kg; lognormal variance with pedigree 0.014, pedigree (4,1,3,1,1)
  properties: dry mass 1 kg, wet mass 1 kg
- synthetic rubber: 0.12 kg; lognormal variance with pedigree 0.010625, pedigree (2,1,2,2,1)
  properties: carbon content, fossil 0.871949, dry mass 1 kg, heating value, net 26.42 MJ, wet mass 1 kg
- tap water: 150 kg; lognormal variance with pedigree 0.012825, pedigree (3,3,3,2,1)
  properties: carbon content, fossil 0.00178991, dry mass 0.000337476 kg, water content 2962.17, wet mass 1 kg
- waste concrete: -5.39 kg; lognormal variance with pedigree 0.0106, pedigree (2,1,1,1,1)
  properties: dry mass 0.5 kg, water content 1, wet mass 1 kg
- waste mineral oil: -0.02 kg; lognormal variance with pedigree 0.008025, pedigree (3,1,1,2,1)
  properties: carbon content, fossil 0.864444, dry mass 0.9 kg, heating value, net 34.7 MJ, water content 0.111111, wet mass 1 kg
- waste rubber, unspecified: -0.12 kg; lognormal variance with pedigree 0.008025, pedigree (3,1,1,2,1)
  properties: carbon content, fossil 0.853, dry mass 1 kg, heating value, net 27.19 MJ, wet mass 1 kg

## Sampling procedure
Inventory data of corresponding concrete in ecoinvent 3; composition according to standard requirements

## Extrapolations
See geography
