# oxidation of manganese dioxide

Dataset: EcoSpold 2, unit process
Geography: RoW
Time period: 1990-01-01 to 2022-12-31
Technology level: current
Classification: ISIC rev.4 ecoinvent: 2011:Manufacture of basic chemicals
Synonyms: Chameleon mineral; Permanganate of potash; Argucide; Condy's crystals; 7722-64-7
Scenario: Business-as-Usual
System model: Substitution, consequential, long-term
Share of production covered: 100 %
Generated by: Jürgen Sutter
Published in: Althaus H.-J. 2007
Database: ecoinvent
isCopyrightProtected: true
accessRestrictedTo: 1

## General comment
This dataset represents the oxidation of manganese dioxide, which delivers the co-products potassium permanganate (KMnO4) and, to a minor extent, potassium carbonate (K2CO3). Hydrogen, which is also a byproduct of this process, has been omitted from this dataset.
In the United States, potassium permanganate is primarily used for environmental applications, such as drinking water treatment (removal of tastes, odors, iron, and manganese, and control of trihalomethanes), wastewater treatment (destruction of hydrogen sulfide and other toxic and/or corrosive compounds, including phenols and plating wastes), and air purification (degradation of malodorous or toxic constituents in industrial off-gases). In other parts of the world (particularly Eastern Europe and India), the principal use of potassium permanganate is in chemical processing, especially the manufacture of synthetic organics. Numerous intermediates for pharmaceuticals and pesticides are made via permanganate oxidation, as are many fine organics, including flavoring. Significant amounts are also consumed for the oxidative destruction or precipitation of undesirable impurities, often ones that impart unwanted colors or odors. In recent years, KMnO4 has played a major role in the bleaching of indigo and other dyes for cotton twill fashion garments. Permanganate is also used for bleaching beeswax, natural sponges, jute fibers, and certain clays. Other important uses include surface treatment of carbon steels and stainless steels (descaling and desmutting, especially in wire manufacture), etching of rubber and plastics, and decontamination of nuclear reactors. Fish farmers utilize KMnO4 to prevent oxygen depletion and to control fish parasites.
Anhydrous potassium carbonate (K2CO3) is a white, hygroscopic, powdery material that deliquesces in moist air. The glass industry is the most important consumer of K2CO3. Large amounts are also required for potassium silicate manufacture. Potassium carbonate is additonally used for many organic syntheses, such as the production of potassium salts, and as a starting material for the production of drying, neutralization, and condensation agents. Potassium carbonate is used as a fertilizer for acidic soil. Other users are the electrical industry, the dye industry, the printing trade, the textile industry, the leather goods industry, and the ceramic industry. The food industry uses potassium carbonate as a leavening agent in baked goods, as a debitterizing agent for cocoa beans, and as an additive for drying raisins. Potash is also frequently used in the pharmaceutical industry as a raw material and auxiliary.
This dataset is based on stoichiometric calculations as well as estimations based on data from a large chemical factory (Gendorf 2016).
References:
Reidies, A. H. 2000. Manganese Compounds. Ullmann's Encyclopedia of Industrial Chemistry.
Sutter J. (2007) Life Cycle Inventories of Highly Pure Chemicals. Final report ecoinvent data v2.0, No. 19. Swiss Centre for Life Cycle Inventories, Dübendorf, CH.
Gendorf (2016) Umwelterklärung 2015, Werk Gendorf Industriepark, www.gendorf.de.

## Included activities start
The activity starts when the raw materials enter the process.

## Included activities end
This activity ends with the production of potassium permanganate. It consists of the manganese dioxide oxidation process, including materials, energy uses, infrastructure and emissions. The amount of hydrogen byproduct has been omitted from the dataset.

## Geography
The inventory is modelled for Europe but is assumed to be representative of the global production. Some values are based on data from a large chemical factory located in Germany. These are assumed to be valid for this geography.

## Technology
The production of potassium permanganate consists of two steps: first a fusion process (either by the roasting process or the liquid-phase process), followed by the anodic oxidation of manganate(VI) to permanganate by electrolysis (Reidies 2000).
References:
Reidies, A. H. 2000. Manganese Compounds. Ullmann's Encyclopedia of Industrial Chemistry.

## Time period
Time of publications. Some values are based on data published by the Gendorf factory that were collected between 2011 and 2015. The time period has been adjusted accordingly. For more details, see the comments of the exchanges.

## Reference product
- potassium permanganate: 1 kg; By-product classification allocatable product; CPC 34250: Salts of oxometallic or peroxometallic acids; colloidal precious metals and compounds thereof; inorganic and o[…]
  production volume 2.00822e7 kg
  properties: carbon allocation 0 kg, carbon content 0, carbon content, fossil 0, carbon content, non-fossil 0, dry mass 1 kg, price 1.51 EUR2005, water content 0, water in wet mass 0 kg, wet mass 1 kg

## Inputs from technosphere
- carbon dioxide, liquid: 0.0128076 kg; lognormal variance with pedigree 0.038, pedigree (4,5,2,5,1)
  properties: carbon content, fossil 0.272727, dry mass 1 kg, heating value, net 8.27 MJ, wet mass 1 kg
- chemical factory, organics: 4e-10 unit; lognormal variance with pedigree 0.3098, pedigree (2,3,2,4,3)
- electricity, medium voltage: 0.0524137, 0.00196107, 0.024916, 0.432448, 0.0363116, 0.00194628 kWh (6 suppliers, which the file names only by identifier); sum of these 0.549997 kWh; lognormal variance with pedigree 0.072, pedigree (1,1,5,5,1)
- heat, district or industrial, natural gas: 0.283255, 1.86675 MJ (2 suppliers, which the file names only by identifier); sum of these 2.15 MJ; lognormal variance with pedigree 0.0104, pedigree (2,3,2,4,3)
  properties: heating value, net 1 MJ
- heat, from steam, in chemical industry: 0.2 MJ; lognormal variance with pedigree 0.0104, pedigree (2,3,2,4,3)
  properties: heating value, net 1 MJ
- inert waste, for final disposal: -0.0908675 kg; lognormal variance with pedigree 0.038, pedigree (4,5,1,5,1)
  properties: dry mass 0.995 kg, water content 0.00502513, wet mass 1 kg
- manganese concentrate: 0.611808 kg; lognormal variance with pedigree 0.038, pedigree (4,5,2,5,1)
  properties: dry mass 1 kg, wet mass 1 kg
- oxygen, liquid: 0.101266 kg; lognormal variance with pedigree 0.038, pedigree (4,5,2,5,1)
  properties: dry mass 1 kg, wet mass 1 kg
- potassium hydroxide: 0.393809 kg; lognormal variance with pedigree 0.038, pedigree (4,5,2,5,1)
  properties: dry mass 0.856 kg, water content 0.168224, wet mass 1 kg
- tap water: 0.00118255, 0.000415735, 0.00318571, 0.000633753, 0.00459085, 1.0659e-5, 0.0159807 kg (7 suppliers, which the file names only by identifier); sum of these 0.026 kg; lognormal variance with pedigree 0.0104, pedigree (2,3,2,4,3)
  properties: carbon content, fossil 0.00178991, dry mass 0.000337476 kg, water content 2962.17, wet mass 1 kg
- wastewater, average: -2.69042e-6, -9.57892e-9 m3 (2 suppliers, which the file names only by identifier); sum of these -2.7e-6 m3; lognormal variance with pedigree 0.0104, pedigree (2,3,1,4,3)
  properties: carbon content, non-fossil 0.194039, dry mass 0.346837 kg, water content 2882.2, wet mass 1000 kg

## Inputs from nature
- Water, cooling, unspecified natural origin [natural resource, in water]: 0.0164 m3; lognormal variance with pedigree 0.0104, pedigree (2,3,2,4,3)
- Water, river [natural resource, in water]: 0.00086 m3; lognormal variance with pedigree 0.0104, pedigree (2,3,2,4,3)
- Water, well, in ground [natural resource, in water]: 0.00083 m3; lognormal variance with pedigree 0.0104, pedigree (2,3,2,4,3)

## Emissions to nature
- Carbon dioxide, fossil [air, urban air close to ground]: 0.000251123 kg; lognormal variance with pedigree 0.1786, pedigree (4,5,5,5,5)
- Water [air, unspecified]: 0.0014 m3; lognormal variance with pedigree 0.0104, pedigree (2,3,2,4,3)
- Water [water, unspecified]: 0.0167 m3; lognormal variance with pedigree 0.0104, pedigree (2,3,2,4,3)

## Sampling procedure
Literature data and stoechiometric calculations. Some values are calculated based on data from a large chemical factory located in Germany. For more details, see the comments of the exchanges.

## Extrapolations
This dataset has been copied from an original dataset covering the geography RER. The uncertainty has been adjusted accordingly.

## Review by Gregor Wernet 2017-08-04
This dataset was additionally reviewed in a separate review process by Eric Johnson of Atlantic Consulting as well as Emilia Moreno Ruiz and Gregor Wernet of ecoinvent.
