# metal working, average for metal product manufacturing

Dataset: EcoSpold 2, unit process
Geography: RoW
Time period: 2006-01-01 to 2022-12-31
Technology level: current
Classification: ISIC rev.4 ecoinvent: 259:Manufacture of other fabricated metal products; metalworking service activit
Classification: EcoSpold01Categories: metals/general manufacturing
Tags: ConvertedDataset
Scenario: Business-as-Usual
System model: Substitution, consequential, long-term
Share of production covered: 0 %
Generated by: Roland Steiner
Published in: Steiner, R. 2007
Database: ecoinvent
isCopyrightProtected: true
accessRestrictedTo: 1

## General comment
1 kg of this process is needed to produce 1 kg of final product.
[This dataset was already contained in the ecoinvent database version 2. It was not individually updated during the transfer to ecoinvent version 3. Life Cycle Impact Assessment results may still have changed, as they are affected by changes in the supply chain, i.e. in other datasets. This dataset was generated following the ecoinvent quality guidelines for version 2. It may have been subject to central changes described in the ecoinvent version 3 change report (http://www.ecoinvent.org/database/ecoinvent-version-3/reports-of-changes/), and the results of the central updates were reviewed extensively. The changes added e.g. consistent water flows and other information throughout the database. The documentation of this dataset can be found in the ecoinvent reports of version 2, which are still available via the ecoinvent website. The change report linked above covers all central changes that were made during the conversion process.]

## Included activities end
This dataset encompasses manufacturing processes to make a semi-manufactured product into a final product. It includes average values for the processing by machines as well as the factory infrastructure and operation. Furthermore, an additional metal input is considered for the loss during processsing. Degreasing is not included and has to be added if necessary.

## Geography
Average data from several local to global sized companies. The main focus is on Germany and Europe.

## Technology
The data is an average of mostly European companies and their production technologies.

## Reference product
- metal working, average for metal product manufacturing: 1 kg; By-product classification allocatable product; CPC 893: Casting, forging, stamping and similar metal manufacturing services
  production volume 2.67763 kg
  properties: carbon allocation 0 kg, carbon content 0, price 0.416517 EUR2005

## Inputs from technosphere
- aluminium, cast alloy: 0.0023776 kg; lognormal variance with pedigree 0.0214, pedigree (2,3,5,5,3)
  properties: dry mass 1 kg, wet mass 1 kg
- aluminium, wrought alloy: 0.0050524 kg; lognormal variance with pedigree 0.0214, pedigree (2,3,5,5,3)
  properties: dry mass 1 kg, wet mass 1 kg
- copper, cathode: 0.0278 kg; lognormal variance with pedigree 0.0214, pedigree (2,3,5,5,3)
  properties: dry mass 1 kg, wet mass 1 kg
- energy and auxilliary inputs, metal working factory: 1 kg; lognormal variance with pedigree 0.0208, pedigree (1,3,5,5,3)
- energy and auxilliary inputs, metal working machine: 1 kg; lognormal variance with pedigree 0.0208, pedigree (1,3,5,5,3)
- metal working factory: 4.58e-10 unit; lognormal variance with pedigree 0.3208, pedigree (1,3,5,5,3)
- metal working machine, unspecified: 3.95e-5 kg; lognormal variance with pedigree 0.3208, pedigree (1,3,5,5,3)
- steel, chromium steel 18/8, hot rolled: 0.00447 kg; lognormal variance with pedigree 0.0214, pedigree (2,3,5,5,3)
  properties: carbon content, fossil 0.0008, dry mass 1 kg, wet mass 1 kg
- steel, low-alloyed, hot rolled: 0.187 kg; lognormal variance with pedigree 0.0214, pedigree (2,3,5,5,3)
  properties: carbon content, fossil 0.005, dry mass 1 kg, wet mass 1 kg

## Extrapolations
none This dataset has been copied from an original dataset covering the geography RER. The uncertainty has been adjusted accordingly.

## Review by Sébastien Humbert 2007-09-05
passed
none
