# impact extrusion of aluminium, 5 strokes

Dataset: EcoSpold 2, unit process
Geography: RoW
Time period: 2006-01-01 to 2022-12-31
Technology level: current
Classification: EcoSpold01Categories: metals/chipless shaping
Classification: ISIC rev.4 ecoinvent: 2591:Forging, pressing, stamping and roll-forming of metal; powder metallurgy
Tags: ConvertedDataset
Scenario: Business-as-Usual
System model: Substitution, consequential, long-term
Share of production covered: 0 %
Generated by: Roland Steiner
Published in: Steiner, R. 2007
Database: ecoinvent
isCopyrightProtected: true
accessRestrictedTo: 1

## General comment
The reference for impact extrusion is 1 kg of metal formed by impact extrusion. As there is a large variation from factory to factory with regard to the LCI, it is advised that in case this dataset becomes important in the results, it has to be investigated further if the rough estimations made are applicable or not.
[This dataset was already contained in the ecoinvent database version 2. It was not individually updated during the transfer to ecoinvent version 3. Life Cycle Impact Assessment results may still have changed, as they are affected by changes in the supply chain, i.e. in other datasets. This dataset was generated following the ecoinvent quality guidelines for version 2. It may have been subject to central changes described in the ecoinvent version 3 change report (http://www.ecoinvent.org/database/ecoinvent-version-3/reports-of-changes/), and the results of the central updates were reviewed extensively. The changes added e.g. consistent water flows and other information throughout the database. The documentation of this dataset can be found in the ecoinvent reports of version 2, which are still available via the ecoinvent website. The change report linked above covers all central changes that were made during the conversion process.]

## Included activities end
This dataset encompasses the electricity consumption of the machine as well as common pre- and post treatments. Furthermore, machine as well as factory infrastructure and operation are considered as well. Degreasing is not included and has to be added if necessary.

## Geography
Geographical coverage encompasses the industrialised countries.

## Technology
Average technology

## Reference product
- impact extrusion of aluminium, 5 strokes: 1 kg; By-product classification allocatable product; CPC 89330: Metal forging, pressing, stamping, roll forming and powder metallurgy services
  production volume 2.67763 kg
  properties: carbon allocation 0 kg, carbon content 0, price 0.403456 EUR2005

## Inputs from technosphere
- compressed air, 700 kPa gauge: 1.45 m3; lognormal variance with pedigree 0.1008, pedigree (4,3,5,5,4)
- energy and auxilliary inputs, metal working factory: 1 kg; lognormal variance with pedigree 0.1008, pedigree (4,3,5,5,4)
- impact extrusion of aluminium, cold, initial surface treatment: 1 kg; lognormal variance with pedigree 0.002, pedigree (1,1,5,5,1)
- impact extrusion of aluminium, cold, tempering: 1 kg; lognormal variance with pedigree 0.002, pedigree (1,1,5,5,1)
- impact extrusion of aluminium, deformation stroke: 5 kg; lognormal variance with pedigree 0.002, pedigree (1,1,5,5,1)
- metal working factory: 4.58e-10 unit; lognormal variance with pedigree 0.4008, pedigree (4,3,5,5,4)
- metal working machine, unspecified: 3.95e-5 kg; lognormal variance with pedigree 0.4008, pedigree (4,3,5,5,4)

## Extrapolations
none This dataset has been copied from an original dataset covering the geography RER. The uncertainty has been adjusted accordingly.

## Review by Sébastien Humbert 2007-09-05
passed
none
