# treatment of waste, pneumatic tyres, open burning

Dataset: EcoSpold 2, unit process
Geography: RoW
Time period: 2010-01-01 to 2022-12-31
Technology level: current
Classification: ISIC rev.4 ecoinvent: 3821:Treatment and disposal of non-hazardous waste
Synonyms: open, uncontrolled burning
Scenario: Business-as-Usual
System model: Substitution, consequential, long-term
Generated by: Avraam Symeonidis
Database: ecoinvent
isCopyrightProtected: true
accessRestrictedTo: 1

## General comment
This dataset represents the activity of waste disposal of waste, pneumatic tyres in uncontrolled, open burning. Recommended use of this dataset: The process takes place in an infromal recycling site in the capital of Ghana, Accra. Iron recovery is a source of income for the informal recyclers and hence is the major motive behind this process. This dataset models emissions from open burning of end-of-life tyres (ELTs). Any geographical and temporal distinctions and climate situation are irrelevant for this UPR-LCI. Inventoried waste contains 88.5% ELTs (burnable part); 11.5% Iron in ELTs; . Waste composition (wet, in ppm): upper heating value 31.99 MJ/kg; lower heating value 31.99 MJ/kg; H2O n.a.; O 28492; H 61206; C 688560; S 13982; N 4484.9; P n.a.; B n.a.; Cl n.a.; Br n.a.; F n.a.; I n.a.; Ag n.a.; As n.a.; Ba n.a.; Cd n.a.; Co n.a.; Cr n.a.; Cu n.a.; Hg n.a.; Mn 1134.4; Mo n.a.; Ni n.a.; Pb n.a.; Sb n.a.; Se n.a.; Sn n.a.; V n.a.; Zn 15565; Be n.a.; Sc n.a.; Sr n.a.; Ti n.a.; Tl n.a.; W n.a.; Si 11080; Fe 115000; Ca 1688.4; Al n.a.; K n.a.; Mg n.a.; Na n.a.; . Share of metals in waste not oxidised and bulk-recyclable (exclude very small or thin parts) iron: 100%, . // Recycling rates for metallic iron = 95% for metallic aluminium = 0% for metallic copper = 95% . From the burn residues 0.109kg iron, are separated and recycled. A mass of 0.0954kg residues are left on ground.
Reference: Positioning used tyres as a major fuel source. Alianpur, 2009 p 14. Available at: https://www.aliapur.fr/pdf/2_positioning_used_tyres_as_a_major_fuel_source.pdf. Accessed on 30th of September 2017.

## Included activities start
open burning starting from waste placement on burning site (without transports to the site)

## Included activities end
Waste-specific emissions to air and soil from open burning.

## Geography
Generic open burning without any geographical distinction.

## Technology
This is an inventory for open burning of solid waste. Informal or uncontrolled burning. No flue gas treatment. Suitable for informal recycling (e.g. burning of e-waste). Based on Municipal waste incineration without any pollution control. Residues (minus any actually recycled metals) are left on site. Assumption of share of thermal NOx to total NOx in average waste burning process is 30%. Contribution from thermal NOx is 810mg per kg waste. Recycling rates for metallic iron = 95% for metallic aluminium = 0% for metallic copper = 95% .

## Time period
generic open burning without any temporal distinction

## Reference product
- waste, pneumatic tyres: -1 kg; By-product classification Waste; CPC 39260: Used pneumatic tyres of rubber
  production volume 3.10822e8 kg
  properties: calcium content 0.0017939, carbon allocation 0.73158 kg, carbon content 0.73158, carbon content, fossil 0.51211, carbon content, non-fossil 0.21947, dry mass 1 kg, heating value, gross 31.99 MJ, heating value, net 31.99 MJ, hydrogen content 0.06503, iron content 0.12219, manganese content 0.0012053, nitrogen content 0.0047651, oxygen content 0.030272, price 0 EUR2005, silicon content 0.011773, sulfur content 0.014856, water content 0, water in wet mass 0 kg, wet mass 1 kg, zinc content 0.016538

## Inputs from technosphere
- iron scrap, sorted, pressed: -0.05465, -0.05465 kg (2 suppliers, which the file names only by identifier); sum of these -0.1093 kg; lognormal variance with pedigree 0.1091, pedigree (1,1,1,1,1)
  properties: dry mass 1 kg, price 0.175 EUR2005, wet mass 1 kg

## Inputs from nature
- Oxygen [natural resource, in air]: 2.2554 kg; lognormal variance with pedigree 0.01144, pedigree (1,1,3,1,1)

## Emissions to nature
- Acetaldehyde [air, urban air close to ground]: 0.0004284 kg; lognormal variance with pedigree 0.0411, pedigree (1,1,3,1,1)
- Benzene [air, urban air close to ground]: 0.00097975 kg; lognormal variance with pedigree 0.0411, pedigree (1,1,3,1,1)
- Benzene, ethyl- [air, urban air close to ground]: 0.00032746 kg; lognormal variance with pedigree 0.0411, pedigree (1,1,3,1,1)
- Calcium [air, urban air close to ground]: 3.9863e-5 kg; lognormal variance with pedigree 0.6243, pedigree (1,1,3,1,1)
- Carbon dioxide, fossil [air, urban air close to ground]: 1.7046 kg; lognormal variance with pedigree 0.004526, pedigree (1,1,3,1,1)
- Carbon dioxide, non-fossil [air, urban air close to ground]: 0.73056 kg; lognormal variance with pedigree 0.004526, pedigree (1,1,3,1,1)
- Carbon monoxide, fossil [air, urban air close to ground]: 0.02702 kg; lognormal variance with pedigree 0.6476, pedigree (1,1,3,1,1)
- Dinitrogen monoxide [air, urban air close to ground]: 0.00011625 kg; lognormal variance with pedigree 0.0411, pedigree (1,1,3,1,1)
- Formaldehyde [air, urban air close to ground]: 0.00044365 kg; lognormal variance with pedigree 0.0411, pedigree (1,1,3,1,1)
- Manganese II [air, urban air close to ground]: 9.6562e-6 kg; lognormal variance with pedigree 0.6947, pedigree (1,1,3,1,1)
- Methane, fossil [air, urban air close to ground]: 0.00413 kg; lognormal variance with pedigree 0.0411, pedigree (1,1,3,1,1)
- Methane, non-fossil [air, urban air close to ground]: 0.00177 kg; lognormal variance with pedigree 0.0411, pedigree (1,1,3,1,1)
- Nitrogen oxides [air, urban air close to ground]: 0.0062637 kg; lognormal variance with pedigree 0.3791, pedigree (1,1,3,1,1)
- PAH, polycyclic aromatic hydrocarbons [air, urban air close to ground]: 0.0003443 kg; lognormal variance with pedigree 0.3017, pedigree (1,1,3,1,1)
- Particulate Matter, < 2.5 um [air, urban air close to ground]: 0.0001105 kg; lognormal variance with pedigree 0.2343, pedigree (1,1,3,1,1)
- Particulate Matter, > 10 um [air, urban air close to ground]: 4.2501e-5 kg; lognormal variance with pedigree 0.2343, pedigree (1,1,3,1,1)
- Particulate Matter, > 2.5 um and < 10um [air, urban air close to ground]: 5.9501e-5 kg; lognormal variance with pedigree 0.2343, pedigree (1,1,3,1,1)
- Phenol [air, urban air close to ground]: 1.4799e-5 kg; lognormal variance with pedigree 0.0411, pedigree (1,1,3,1,1)
- Polychlorinated biphenyls [air, urban air close to ground]: 1.1189e-7 kg; lognormal variance with pedigree 0.0411, pedigree (1,1,3,1,1)
- Silicon [air, urban air close to ground]: 5.1773e-8 kg; lognormal variance with pedigree 0.6183, pedigree (1,1,3,1,1)
- Styrene [air, urban air close to ground]: 0.0005275 kg; lognormal variance with pedigree 0.0411, pedigree (1,1,3,1,1)
- Sulfur dioxide [air, urban air close to ground]: 0.0060221 kg; lognormal variance with pedigree 0.3379, pedigree (1,1,3,1,1)
- Toluene [air, urban air close to ground]: 0.000372 kg; lognormal variance with pedigree 0.0411, pedigree (1,1,3,1,1)
- Water [air, urban air close to ground]: 0.00048964 m3; lognormal variance with pedigree 0.1674, pedigree (1,1,3,1,1)
- Zinc II [air, urban air close to ground]: 0.0001158 kg; lognormal variance with pedigree 0.3715, pedigree (1,1,3,1,1)
- Calcium [soil, industrial]: 0.0016486 kg; lognormal variance with pedigree 0.5897, pedigree (1,1,3,1,1)
- Carbon [soil, industrial]: 0.0034532 kg; lognormal variance with pedigree 0.06877, pedigree (1,1,3,1,1)
- Iron ion [soil, industrial]: 0.00575 kg; lognormal variance with pedigree 2.222, pedigree (1,1,3,1,1)
- Manganese II [soil, industrial]: 0.0011248 kg; lognormal variance with pedigree 0.6412, pedigree (1,1,3,1,1)
- Nitrogen [soil, industrial]: 4.4903e-5 kg; lognormal variance with pedigree 0.5158, pedigree (1,1,3,1,1)
- Silicon [soil, industrial]: 0.01108 kg; lognormal variance with pedigree 0.3552, pedigree (1,1,3,1,1)
- Sulfur [soil, industrial]: 0.011975 kg; lognormal variance with pedigree 0.3278, pedigree (1,1,3,1,1)
- Zinc II [soil, industrial]: 0.015449 kg; lognormal variance with pedigree 0.3153, pedigree (1,1,3,1,1)

## Sampling procedure
The waste composition was derived from literature. All information are found in the general comment. The UPR-LCI is created with a model for waste-specific life cycle inventories of open burning of waste.

Reference for the model:
Doka G. (2017) A model for waste-specific life cycle inventories of open burning of waste. Doka Life Cycle
Assessments, Zurich, Switzerland. Available at http://www.doka.ch/publications.htm

## Review by Gabor Doka 2018-01-30
passed.
