# sputtering target production, sintered, indium tin oxide

Dataset: EcoSpold 2, unit process
Geography: RoW
Time period: 2003-01-01 to 2022-12-31
Technology level: current
Classification: ISIC rev.4 ecoinvent: 2592:Treatment and coating of metals; machining
Classification: EcoSpold01Categories: electronics/module
Synonyms: sputtering target; Indium Tin Oxide; Indium Zinn Oxid
Tags: ConvertedDataset
Scenario: Business-as-Usual
System model: Substitution, consequential, long-term
Generated by: Mischa Classen
Published in: Hischier R. 2007
Database: ecoinvent
isCopyrightProtected: true
accessRestrictedTo: 1

## General comment
This module relates to 1 kg ITO net bound to a backplate. It comprises the forming of a high-density sintered body from ITO and its attachment to a copper backplate. Dimensions assumed: 610mm x 350mm. No direct process emissions are considered due to a lack of respective information.
[This dataset was already contained in the ecoinvent database version 2. It was not individually updated during the transfer to ecoinvent version 3. Life Cycle Impact Assessment results may still have changed, as they are affected by changes in the supply chain, i.e. in other datasets. This dataset was generated following the ecoinvent quality guidelines for version 2. It may have been subject to central changes described in the ecoinvent version 3 change report (http://www.ecoinvent.org/database/ecoinvent-version-3/reports-of-changes/), and the results of the central updates were reviewed extensively. The changes added e.g. consistent water flows and other information throughout the database. The documentation of this dataset can be found in the ecoinvent reports of version 2, which are still available via the ecoinvent website. The change report linked above covers all central changes that were made during the conversion process.]

## Included activities end
Production of nanoscaled powder, sintering, bonding, and production of backplate.

## Technology
Pressing at 250 Mpa, sintering at 1'500°C for 3h. Soldering with Indium to backplate

## Reference product
- sputtering target, sintered, indium tin oxide: 1 kg; By-product classification allocatable product; CPC 88731: Metal treatment and coating services
  production volume 2.67763 kg
  properties: carbon allocation 0 kg, carbon content 0, carbon content, fossil 0, carbon content, non-fossil 0, dry mass 1 kg, price 107.86 EUR2005, water content 0, water in wet mass 0 kg, wet mass 1 kg

## Inputs from technosphere
- chemical factory, organics: 8e-10 unit; lognormal variance with pedigree 0.5301, pedigree (4,2,5,5,5)
- copper, cathode: 0.76648 kg; lognormal variance with pedigree 0.2227, pedigree (2,2,5,5,5)
  properties: dry mass 1 kg, wet mass 1 kg
- electricity, medium voltage: 0.0452714, 0.00169384, 0.0215208, 0.373519, 0.0313635, 0.00168107 kWh (6 suppliers, which the file names only by identifier); sum of these 0.47505 kWh; lognormal variance with pedigree 0.2301, pedigree (4,2,5,5,5)
- indium: 0.022688 kg; lognormal variance with pedigree 0.2301, pedigree (4,2,5,5,5)
  properties: dry mass 1 kg, wet mass 1 kg
- indium tin oxide powder, nanoscale, for sputtering target: 1 kg; lognormal variance with pedigree 0.2301, pedigree (4,2,5,5,5)
  properties: dry mass 1 kg, wet mass 1 kg
- sheet rolling, copper: 0.76648 kg; lognormal variance with pedigree 0.2227, pedigree (2,2,5,5,5)

## Sampling procedure
Literature

## Extrapolations
see General Comments This dataset has been copied from an original dataset covering the geography RER. The uncertainty has been adjusted accordingly.

## Review by Roberto Dones 2007-08-22
Passed
