# rape seed production, for sowing

Dataset: EcoSpold 2, unit process
Geography: RoW
Time period: 1999-01-01 to 2022-12-31
Technology level: current
Classification: EcoSpold01Categories: agricultural means of production/seed
Classification: ISIC rev.4 ecoinvent: 0164:Seed processing for propagation
Scenario: Business-as-Usual
System model: Substitution, consequential, long-term
Share of production covered: 50 %
Generated by: Thomas Nemecek
Published in: Nemecek, T. 2007
Database: ecoinvent
isCopyrightProtected: true
accessRestrictedTo: 1

## General comment
Refers to 1 kg seed of rape seed (fresh weight), with a maximum water content of 6%
[This dataset was already contained in the ecoinvent database version 2. It was not individually updated during the transfer to ecoinvent version 3. Life Cycle Impact Assessment results may still have changed, as they are affected by changes in the supply chain, i.e. in other datasets. This dataset was generated following the ecoinvent quality guidelines for version 2. It may have been subject to central changes described in the ecoinvent version 3 change report (http://www.ecoinvent.org/database/ecoinvent-version-3/reports-of-changes/), and the results of the central updates were reviewed extensively. The changes added e.g. consistent water flows and other information throughout the database. The documentation of this dataset can be found in the ecoinvent reports of version 2, which are still available via the ecoinvent website. The change report linked above covers all central changes that were made during the conversion process.]

## Included activities start
This activity starts after harvest of the seed.

## Included activities end
The seed is processed in the processing centre, treated (pre-cleaning, cleaning, eventually drying, chemical dressing (for integrated production) and bag filling), stored and afterwards transported to the regional storage centre. No data on wastewater production were available.

## Technology
Refers to average seed processing

## Time period
Date of the major data sources.

## Reference product
- rape seed, for sowing: 1 kg; By-product classification allocatable product; CPC 01443: Rape or colza seed
  production volume 4.79512e8 kg
  properties: carbon allocation 0.53956 kg, carbon content 0.574, carbon content, fossil 0, carbon content, non-fossil 0.574, dry mass 0.94 kg, energy content 24.8912 MJ, price 0.540882 EUR2005, water content 0.0638298, water in wet mass 0.06 kg, wet mass 1 kg

## Inputs from technosphere
- building, multi-storey: 2e-5 m3; lognormal variance with pedigree 0.0026, pedigree (2,1,5,5,1)
- electricity, low voltage: 0.00222024, 0.00080712, 0.000165074, 0.000656674, 0.00473427, 0.00440755, 0.0395207, 0.00548838 kWh (8 suppliers, which the file names only by identifier); sum of these 0.058 kWh; lognormal variance with pedigree 0.0026, pedigree (2,1,5,5,1)
- rape seed: 1.75 kg; lognormal variance with pedigree 0.0026, pedigree (2,1,5,5,1)
  properties: carbon content, non-fossil 0.574, dry mass 0.94 kg, water content 0.0638298, wet mass 1 kg

## Inputs from nature
- Occupation, construction site [natural resource, land]: 8e-6 m2*year; lognormal variance with pedigree 0.0426, pedigree (2,1,5,5,1)
- Occupation, industrial area [natural resource, land]: 0.0002 m2*year; lognormal variance with pedigree 0.0426, pedigree (2,1,5,5,1)
- Transformation, from unspecified [natural resource, land]: 4e-6 m2; lognormal variance with pedigree 0.1226, pedigree (2,1,5,5,1)
- Transformation, to industrial area [natural resource, land]: 4e-6 m2; lognormal variance with pedigree 0.1226, pedigree (2,1,5,5,1)

## Sampling procedure
Data based on a literature, expert information and enquiry of seed processing plants.

## Extrapolations
Production of imported seed is approximated by seed produced in Switzerland. This dataset has been copied from an original dataset covering the geography CH. The uncertainty has been adjusted accordingly.

## Review by Hans-Jörg Althaus 2007-08-13
passed
