# land already in use, perennial cropland to annual crop

Dataset: EcoSpold 2, unit process
Geography: TH
Time period: 2010-01-01 to 2022-12-31
Technology level: current
Classification: ISIC rev.4 ecoinvent: 0161:Support activities for crop production
Tags: WFLDB
Scenario: Business-as-Usual
System model: Substitution, consequential, long-term
Generated by: Vincent Rossi
Database: ecoinvent
isCopyrightProtected: true
accessRestrictedTo: 1

## General comment
This dataset represents the interventions associated with the provision of 1 kg NPP0 (Net Primary Production) by land that is already in use.
NPP (net primary productivity of a given land, in kg C / m2 and year) and VEG (above-ground biomass) values are parameterized.
NPP values are reported by Haberl et al. (2007)
VEG values have the following sources:
- Forests: Global Forest Resources Assessment 2010: http://www.fao.org/forestry/fra/fra2010/en/
- Grassland: IPCC 2006 Guidelines, Voiume 6, Table 6.4. All values in tonne C/ha, converted to carbon based on 47% carbon content of dry matter biomass (see for example section 6.2.1.4 of IPCC 2006).
- Crops: Cveg croplands, based on Table 11 of the European Commission decision.* All values in tonne C/ha.
* C(2010) 3751: COMMISSION DECISION of 10 June 2010 on guidelines for the calculation of land carbon stocks for the purpose of Annex V to Directive 2009/28/EC, Official Journal of the European Union, L 151/19. Exceptions based on the Table 12 of the EC decision: Coconuts, Jatropha, Jojoba Seeds, Oil palm fruit, Sugar cane
Distinction is made between primary and secondary forests. The respective land area of each type forest is known from FAOSTAT data. Based on empirical values, it is considered that the secondary VEG is 74% of the primary VEG. The same ratio is applied as the weighted average between primary and secondary forest is always equal to the GFRA 2010 value.

## Included activities start
This activity starts with the land already in use.

## Included activities end
The dataset includes all interventions associated with the provision of 1 kg NPP from land already in use as perennial cropland.
This activity ends with the provision of arable land tenure, measured in unit kg carbon Potential Net Primary Production (NPP).

## Parameters
- Above and below ground biomass: 1.754 dimensionless; lognormal variance with pedigree 0.017425, pedigree (2,5,2,2,3)
- LUC_crop_specific: 1 dimensionless
  This parameter allows to switch between a 'crop specific' and a 'country specific' approach when calculating the LUC of a crop. By default, the chosen approach is 'crop specific', so the value of the parameter is 1. If you want to apply a 'country specific' approach, turn the parameter to 0.
- NPP0, net primary productivity: 1.022 dimensionless; lognormal variance with pedigree 0.022825, pedigree (2,5,2,2,3)

## Reference product
- land tenure, arable land, measured as carbon net primary productivity, annual crop: 1 kg; By-product classification allocatable product; CPC 7: Financial and related services; real estate services; and rental and leasing services
  production volume 3.03163e6 kg
  properties: carbon allocation 1 kg, carbon content 1, carbon content, non-fossil 1, dry mass 1 kg, price 0 EUR2005, water content 0, water in wet mass 0 kg, wet mass 1 kg

## Inputs from technosphere
- diesel, burned in building machine: 0.479759 MJ
  properties: heating value, net 1 MJ
- power sawing, without catalytic converter: 0.0011268 hour

## Inputs from nature
- Carbon, organic, in soil or biomass stock [natural resource, in ground]: 1.71624 kg
- Energy, gross calorific value, in biomass [natural resource, biotic]: 68.6497 MJ
- Occupation, construction site [natural resource, land]: 0.0188168 m2*year
- Transformation, from permanent crop [natural resource, land]: 0.978474 m2
- Transformation, to arable land, unspecified use [natural resource, land]: 0.978474 m2

## Emissions to nature
- Carbon dioxide, from soil or biomass stock [air, non-urban air or from high stacks]: 6.29289 kg

## Sampling procedure
Literature data: NPP values taken from Haberl et al. (2007). VEG values taken from GFRA (2010), IPCC (2006) and European Commission (2010).

## Extrapolations
This dataset has been extrapolated from year 2009 to the year of the calculation
