# lithium carbonate production, from spodumene

Dataset: EcoSpold 2, unit process
Geography: CN
Time period: 2014-01-31 to 2022-12-31
Technology level: current
Classification: ISIC rev.4 ecoinvent: 2011:Manufacture of basic chemicals
Scenario: Business-as-Usual
System model: Substitution, consequential, long-term
Share of production covered: 14 %
Generated by: Eleonora Crenna
Published in: Songyan Jiang 2020
Database: ecoinvent
isCopyrightProtected: true
accessRestrictedTo: 1

## General comment
This dataset represents the production of 1 kg of refined lithium carbonate (Li2CO3), with 99.9% purity. The data come from the publication of Jiang et al. (2020). The authors collected the original data from one of the largest rock-based lithium production company in China in Suzhou city, Jiangsu province. This dataset updates any previous version, including the process with consumption of raw materials, energy, infrastructure, as well as the generation of emissions to air (NOx, PM, SOx and H₂SO₄) and water (BOD5, COD, TOC, DOC, phosphorus and suspended solids). Production during stable operation conditions is represented. The manufacturing plant is located in an urban/industrial area, and consequently the emissions are categorised as emanating in a high population density area. Within the production of lithium carbonate, sodium sulfate is derived as by-product.
Reference:
Jiang, S., Zhang, L., Li, F., Hua, H., Liu, X., Yuan, Z., & Wu, H. (2020). Environmental impacts of lithium production showing the importance of primary data of upstream process in life-cycle assessment. Journal of environmental management, 262, 110253.

## Included activities start
The activity starts with the reception of spodumene and includes its processing at the factory gate.

## Included activities end
The activity ends with the production of lithium carbonate, including materials, energy uses, infrastructure and emissions.

## Geography
Dataset valid for the geography China.

## Technology
The production of rock-based lithium carbonate includes calcination, roasting, leaching, purification, carbonation, and drying steps. Air compression and auxiliary systems are included as well. Air compression provides compressed air as energy source along the production steps. Auxiliary systems provide energy for water circulation, removal of dust particles and disposal of waste.
During the initial calcination step, α-spodumene is converted into β-spodumene in a rotary kiln powered by natural gas at 1070–1100 °C. After being cooled down and crushed into smaller powder particles, β-spodumene is mixed with sulfuric acid (98.3%) and roasted at 250°C in another rotary kiln powered by natural gas. Then, lithium sulfate is leached out from the mother liquor with water during a continuous leaching stage at 60°C. Impurities like iron, aluminium, magnesium and calcium are removed by precipitation through reacting with sodium hydroxide (soda lime) and sodium carbonate (soda ash) added to the solution. The leach liquor is further purified by ion-exchange using hydrochloric acid (6%). Other purifying additives, e.g. Kieselguhr or activated charcoal, are used during the purifying filtration step. In the subsequent carbonation stage, sodium carbonate is added to the lithium-rich solution to precipitate lithium carbonate. After being dissolved in water, the solid lithium carbonate reacts with liquid carbon dioxide to generate dissolved lithium hydrogen carbonate (LiHCO3), which is finally treated with steam at 85°C and natural gas to obtain purified and dry lithium carbonate (99.9%) as a main product. The remaining mother liquor consists mainly of sodium sulfate, obtained as by-product of the entire process. Besides sodium sulfate, inert solid wastes are produced. Wastewater is collected and transported in sewers for treatment.

## Time period
Data are considered valid from 2014 (year of the on-field data collection) to 2020 (year of the publication)

## Parameters
- fraction, process water, to air: 0.15 dimensionless; name fraction_PW_to_air
  Literature value. In case when no industry/process specific data are available, default evaporation fraction value is used. This value is 15% and is based on literature (Statistics Canada, 2007 & Shaffer, K.H., 2008, Consumptive water use in the Great Lakes Basin, USGS & Shiklomanov, 2003, World Water Resources at the Beginning of the 21st Century) and has been approved by an expert.

## Reference product
- lithium carbonate: 1 kg; By-product classification allocatable product; CPC 34240: Phosphates of triammonium; salts and peroxysalts of inorganic acids and metals n.e.c.
  production volume 1.234e8 kg
  properties: carbon allocation 0.16255 kg, carbon content 0.16255, carbon content, fossil 0.16255, carbon content, non-fossil 0, dry mass 1 kg, heating value, net 4.93 MJ, lithium content 0.187683, price 6.75 EUR2005, water content 0, water in wet mass 0 kg, wet mass 1 kg

## Inputs from technosphere
- bentonite: 0.0611982 kg; lognormal variance with pedigree 0.0028, pedigree (1,4,3,1,1)
  properties: dry mass 1 kg, wet mass 1 kg
- carbon dioxide, liquid: 0.0509985 kg; lognormal variance with pedigree 0.0028, pedigree (1,4,3,1,1)
  properties: carbon content, fossil 0.272727, dry mass 1 kg, heating value, net 8.27 MJ, wet mass 1 kg
- chemical factory, organics: 2.23857e-10 unit; lognormal variance with pedigree 0.3022, pedigree (1,4,3,1,1)
- electricity, medium voltage: 3.90649 kWh; lognormal variance with pedigree 0.0028, pedigree (1,4,3,1,1)
- heat, district or industrial, natural gas: 50.3554 MJ; lognormal variance with pedigree 0.0028, pedigree (1,4,3,1,1)
  properties: heating value, net 1 MJ
- heat, from steam, in chemical industry: 7.69701 MJ; lognormal variance with pedigree 0.0028, pedigree (1,4,3,1,1)
  properties: heating value, net 1 MJ
- hydrochloric acid, without water, in 30% solution state: 0.183595 kg; lognormal variance with pedigree 0.0028, pedigree (1,4,3,1,1)
  properties: dry mass 1 kg, heating value, net 3.32 MJ, wet mass 1 kg
- hydrogen peroxide, without water, in 50% solution state: 0.122396 kg; lognormal variance with pedigree 0.0028, pedigree (1,4,3,1,1)
  properties: dry mass 1 kg, heating value, net 7.13 MJ, wet mass 1 kg
- inert waste, for final disposal: -11.8215 kg; lognormal variance with pedigree 0.0028, pedigree (1,4,2,1,1)
  properties: dry mass 0.995 kg, lithium content 0.0101791, water content 0.00502513, wet mass 1 kg
- quicklime, milled, loose: 0.662981 kg; lognormal variance with pedigree 0.0028, pedigree (1,4,3,1,1)
  properties: dry mass 0.99 kg, water content 0.010101, wet mass 1 kg
- soda ash, light: 2.30513 kg; lognormal variance with pedigree 0.0028, pedigree (1,4,3,1,1)
  properties: carbon content, fossil 0.0517241, dry mass 1 kg, heating value, net 3.43 MJ, wet mass 1 kg
- sodium hydroxide, without water, in 50% solution state: 0.560984 kg; lognormal variance with pedigree 0.0028, pedigree (1,4,3,1,1)
  properties: dry mass 1 kg, heating value, net 3.03 MJ, wet mass 1 kg
- sodium sulfate, anhydrite: -2.31533 kg; lognormal variance with pedigree 0.0028, pedigree (1,4,2,1,1)
  properties: dry mass 1 kg, price 0.191 EUR2005, wet mass 1 kg
- spodumene: 8.84314 kg; lognormal variance with pedigree 0.0028, pedigree (1,4,3,1,1)
  properties: dry mass 1 kg, lithium content 0.0349, wet mass 1 kg
- sulfuric acid: 3.08031 kg; lognormal variance with pedigree 0.0028, pedigree (1,4,3,1,1)
  properties: dry mass 1 kg, wet mass 1 kg
- tap water: 50.4477 kg; lognormal variance with pedigree 0.0028, pedigree (1,4,3,1,1)
  properties: carbon content, fossil 0.00178991, dry mass 0.000337476 kg, water content 2962.17, wet mass 1 kg
- wastewater, average: -0.0395748 m3; lognormal variance with pedigree 0.0028, pedigree (1,4,2,1,1)
  properties: carbon content, non-fossil 0.194039, dry mass 0.346837 kg, water content 2882.2, wet mass 1000 kg

## Emissions to nature
- Nitrogen oxides [air, urban air close to ground]: 0.00133616 kg; lognormal variance with pedigree 0.0422, pedigree (1,4,3,1,1)
- Particulate Matter, < 2.5 um [air, urban air close to ground]: 0.000508149 kg; lognormal variance with pedigree 0.0428, pedigree (2,4,3,1,1)
- Particulate Matter, > 10 um [air, urban air close to ground]: 1.08117e-5 kg; lognormal variance with pedigree 0.0428, pedigree (2,4,3,1,1)
- Particulate Matter, > 2.5 um and < 10um [air, urban air close to ground]: 2.16234e-5 kg; lognormal variance with pedigree 0.0428, pedigree (2,4,3,1,1)
- Sulfur dioxide [air, urban air close to ground]: 9.17973e-5 kg; lognormal variance with pedigree 0.0028, pedigree (1,4,3,1,1)
- Sulfuric acid [air, urban air close to ground]: 5.09985e-5 kg; lognormal variance with pedigree 0.0422, pedigree (1,4,3,1,1)
- Water [air, unspecified]: 0.00163093 m3; lognormal variance with pedigree 0.218, pedigree (4,5,5,5,5)
- Ammonium [water, unspecified]: 0.037204 kg; lognormal variance with pedigree 0.0422, pedigree (1,4,3,1,1)
- BOD5, Biological Oxygen Demand [water, unspecified]: 0.280492 kg; lognormal variance with pedigree 0.0428, pedigree (2,4,3,1,1)
- COD, Chemical Oxygen Demand [water, unspecified]: 0.560984 kg; lognormal variance with pedigree 0.0422, pedigree (1,4,3,1,1)
- DOC, Dissolved Organic Carbon [water, unspecified]: 0.207772 kg; lognormal variance with pedigree 0.0428, pedigree (2,4,3,1,1)
- Phosphorus [water, unspecified]: 0.00305991 kg; lognormal variance with pedigree 0.0422, pedigree (1,4,3,1,1)
- Suspended solids, unspecified [water, unspecified]: 0.754778 kg; lognormal variance with pedigree 0.0422, pedigree (1,4,3,1,1)
- TOC, Total Organic Carbon [water, unspecified]: 0.207772 kg; lognormal variance with pedigree 0.0428, pedigree (2,4,3,1,1)
- Water [water, unspecified]: 0.00924195 m3; lognormal variance with pedigree 0.218, pedigree (4,5,5,5,5)

## Sampling procedure
All exchanges to the environment and from the technosphere are taken from the life cycle inventory model presented in Jiang et al. (2020). The original data are provided by one of the largest rock-based lithium production company in China (Suzhou city, Jiangsu province) and are reported as economically allocated to the production of 1 kg lithium carbonate, based on sales revenue of lithium carbonate (256.38 million RMB), sodium sulfate (3.73 million RMB) and inert solid waste (1.39 million RMB) in China in 2014. In this dataset, data are back calculated as follows: allocated LCI from Jiang et al. (2020) * (256.38+3.73+1.39) / 256.38. The data in Jiang et al. (2020) are assumed to be representative of the chinese production of lithium carbonate. Infrastructure is calculated with standard values.

## Review by Carl Vadenbo 2021-02-24
Why not "lithium carbonate production, acid leaching of spodumene"?

## Review by Dimitra Ioannidou 2021-02-24
Apoint that Carl raised (and is not included in the comments), which I think is very valuable, is regarding the name of the dataset ‘leaching of spodumene with sulfuric acid’. There is an existing dataset with this name and from what I understand, it will be replaced by the 2 new ones.
Would it make more sense if the new dataset is called ‘lithium carbonate production, from spodumene acid leaching’ (currently we have in the database the activity lithium carbonate production, from concentrated brine)? That kind of name would communicate the RP in the activity name.
