# drying of maize grain

Dataset: EcoSpold 2, unit process
Geography: RoW
Time period: 2000-01-01 to 2022-12-31
Technology level: old
Classification: EcoSpold01Categories: agricultural means of production/work processes
Classification: ISIC rev.4 ecoinvent: 0163:Post-harvest crop activities
Synonyms: corn drying
Scenario: Business-as-Usual
System model: Substitution, consequential, long-term
Generated by: François Saunier
Published in: Nemecek, T. 2007
Database: ecoinvent
isCopyrightProtected: true
accessRestrictedTo: 1

## General comment
The functional unit is kg of water evaporated. This module should be used when evaluating drying of maize grain in column dryer.

## Included activities start
From reception of grains, at the silo gate. Drying process starting from grains, wet.

## Included activities end
This activity ends with dried grains at silo gate.
The dataset is a service dataset. It includes the energy demand (supplied by consumption of electricity and natural gas) for evaporating 1 kg of water, when drying grain at low moisture content at low temperature (60°C) . The data for energy demand are based on the drying at farm, in column dryer, at low temperature of maize from 25% to 14% moisture content. Also included in the inventory is the infrastructure (building and machinery) and land use.
The dataset does not include waste and air emissions (like dust). Grain input, production of the wet educt and utilisation of the dried product are not included.

## Geography
The inventories are based on Quebec technical data (for energy consumption) and indications made by drying plants in Switzerland and values given in international references (Western Europe).

## Technology
Drying at farm, in column dryer, at low temperature (60°C) of grains like maize. Fan motor power is 9.7 kW, and mixing is performed with 3 motors of 3.9 kW each. Evaporation capacity is 5.38 t/h of dried maize grain.
Column dryer is a rather old technology, commonly used in 2000's. It is replaced by more efficient technologies like hot air silo dryer or air recirculation dryer (CRAAQ, 2010). After drying, grains are usually stored in a 350 tonnes capacity ventilated silo for about 10 days.
Dust and particulate emission to air are not considered.

## Time period
Electricity and heat consumption are based on a 2010 report from the CRAAQ. Other data are most based on publications between 2001 and 2002.

## Parameters
- evaporation capacity: 789.1 kg/hour; name evaporation_capacity; lognormal variance with pedigree 0.011, pedigree (1,5,1,5,1)
  kilogram of water evaporated per hour.
  Reference :
  BEAUREGARD, G. (2013). Production budget of agricultural productions in Quebec. Technical report for CIRAIG.
  based on: CRAAQ (2010). Séchage des grains - Données techniques. AGDEX 736, juin 2010, 6p. [Centre de Référence en Agriculture et Agroalimentaire du Québec]
- motor power: 21.4 kW; name motor_power; lognormal variance with pedigree 0.011, pedigree (1,5,1,5,1)
  low voltage
  Reference :
  BEAUREGARD, G. (2013). Production budget of agricultural productions in Quebec. Technical report for CIRAIG.
  based on: CRAAQ (2010). Séchage des grains - Données techniques. AGDEX 736, juin 2010, 6p. [Centre de Référence en Agriculture et Agroalimentaire du Québec]
- quebec cropped area: 1.87476e6 ha; name qc_crop_area; lognormal variance with pedigree 0.0006, pedigree (1,1,1,1,1)
  Land in crops, Quebec, in 2011. Source: Statistics Canada, 2013. Table 004-0002 - Census of Agriculture, total area of farms and use of farm land, CANSIM (database). (accessed: 2013-11-15) ("Land in crops" includes field crops, vegetables, fruits and nursery crops, and sod.) Statistics Canada
- quebec production volume: 4 kg; name PV_Quebec; lognormal variance with pedigree 0.21, pedigree (5,5,5,5,5)
  This is a placeholder value that does not reflect real-world production volumes. This dataset does not currently require a real-world production volume to work in the database framework, and no actual data were collected yet. This has no negative effect on the results of the ecoinvent database.
- world arable land area: 1.39628e9 ha; name world_arable_area; lognormal variance with pedigree 0.0006, pedigree (1,1,1,1,1)
  Arable land area, World, in 2011. Source: FAOSTAT, 2013

## Reference product
- drying of maize grain: 1 l; By-product classification allocatable product; CPC 86111: Post-harvest crop services
  production volume 2971.11 l
  properties: carbon allocation 0 kg, carbon content 0, price 0.0793901 EUR2005

## Inputs from technosphere
- building, hall: 6.7e-5 m2; lognormal variance with pedigree 0.35, pedigree (3,5,4,5,4)
- cast iron: 0.00583 kg; lognormal variance with pedigree 0.058, pedigree (4,5,4,5,4)
  properties: carbon content, fossil 0.04, dry mass 1 kg, wet mass 1 kg
- electricity, low voltage: 2.00912e-5, 3.19736e-5, 1.40687e-5, 1.12156e-5, 0.000122647, 0.000244867, 4.04456e-6, 6.7818e-6, 0.00106459, 0.000387008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 kWh (31 suppliers, which the file names only by identifier); sum of these 0.0271195 kWh; lognormal variance with pedigree 0, pedigree (1,1,4,1,1)
- heat, district or industrial, natural gas: 0.575845, 1.33842 MJ (2 suppliers, which the file names only by identifier); sum of these 1.91427 MJ; lognormal variance with pedigree 0.011, pedigree (1,5,4,5,1)
  properties: heating value, net 1 MJ
- heat, district or industrial, other than natural gas: 0.65092, 3.17761 MJ (2 suppliers, which the file names only by identifier); sum of these 3.82853 MJ; lognormal variance with pedigree 0.011, pedigree (1,5,4,5,1)
  properties: heating value, net 1 MJ

## Inputs from nature
- Occupation, construction site [natural resource, land]: 0.0375 m2*year; lognormal variance with pedigree 0.092, pedigree (3,5,4,5,4)
- Occupation, industrial area [natural resource, land]: 0.625 m2*year; lognormal variance with pedigree 0.092, pedigree (3,5,4,5,4)
- Transformation, from pasture, man made [natural resource, land]: 0.00025 m2; lognormal variance with pedigree 0.17, pedigree (3,5,4,5,4)
- Transformation, to industrial area [natural resource, land]: 0.00025 m2; lognormal variance with pedigree 0.17, pedigree (3,5,4,5,4)

## Extrapolations
This dataset has been copied from the Quebec dataset and has beed adapted with specific data for energy consumption. The uncertainty has been adjusted accordingly.

## Review by Emilia Moreno Ruiz 2015-09-17
broken formula fixed

## Review by Emilia Moreno Ruiz 2017-06-27
unit changed to liter; amounts adjusted
