# biomethane production, low pressure, vehicle grade

Dataset: EcoSpold 2, unit process
Geography: RoW
Time period: 2001-01-01 to 2022-12-31
Technology level: current
Classification: EcoSpold01Categories: biomass/fuels
Classification: ISIC rev.4 ecoinvent: 3520:Manufacture of gas; distribution of gaseous fuels through mains
Synonyms: Kompogas, Naturgas
Tags: ConvertedDataset
Scenario: Business-as-Usual
System model: Substitution, consequential, long-term
Share of production covered: 0 %
Generated by: Mireille Faist Emmenegger (obsolete)
Published in: Jungbluth N. 2007
Database: ecoinvent
isCopyrightProtected: true
accessRestrictedTo: 1

## General comment
The initial pressure of gas is from the low pressure network (<0.1 bar). Air emissions are calculated from gas losses and composition of biogas.
[This dataset was already contained in the ecoinvent database version 2. It was not individually updated during the transfer to ecoinvent version 3. Life Cycle Impact Assessment results may still have changed, as they are affected by changes in the supply chain, i.e. in other datasets. This dataset was generated following the ecoinvent quality guidelines for version 2. It may have been subject to central changes described in the ecoinvent version 3 change report (http://www.ecoinvent.org/database/ecoinvent-version-3/reports-of-changes/), and the results of the central updates were reviewed extensively. The changes added e.g. consistent water flows and other information throughout the database. The documentation of this dataset can be found in the ecoinvent reports of version 2, which are still available via the ecoinvent website. The change report linked above covers all central changes that were made during the conversion process.]

## Included activities end
This data set includes electricity requirements of a biogas service station as well as emissions from losses.

## Geography
Data for Switzerland

## Technology
Service station with low initial gas pressure (<0.1 bar)

## Time period
personal communication

## Reference product
- biomethane, low pressure, vehicle grade: 1 kg; By-product classification allocatable product; CPC 17200: Coal gas, water gas, producer gas and similar gases, other than petroleum gases and other gaseous hydrocarbons
  production volume 3.96633 kg
  properties: carbon allocation 0.695496 kg, carbon content 0.695496, carbon content, fossil 0, carbon content, non-fossil 0.695496, dry mass 1 kg, heating value, net 46.5 MJ, price 6.69264 EUR2005, water content 0, water in wet mass 0 kg, wet mass 1 kg

## Inputs from technosphere
- biomethane, low pressure: 45.833 MJ; lognormal variance with pedigree 0.0021, pedigree (1,2,5,5,1)
  properties: carbon content, non-fossil 0.695496, dry mass 0.0218341 kg, wet mass 0.0218341 kg
- electricity, medium voltage: 0.0617895, 0.011442, 0.00231186, 0.029373, 0.0621777, 0.509804, 0.0428071, 0.00229443 kWh (8 suppliers, which the file names only by identifier); sum of these 0.722 kWh; lognormal variance with pedigree 0.0021, pedigree (1,2,5,5,1)
- natural gas service station: 8.4821e-8 unit; lognormal variance with pedigree 0.3146, pedigree (2,4,5,5,1)

## Emissions to nature
- Carbon dioxide, non-fossil [air, urban air close to ground]: 1.0376e-5 kg; lognormal variance with pedigree 0.1332, pedigree (2,3,5,5,1)
- Hydrogen sulfide [air, urban air close to ground]: 4.0094e-9 kg; lognormal variance with pedigree 0.1332, pedigree (2,3,5,5,1)
- Methane, non-fossil [air, urban air close to ground]: 0.00018125 kg; lognormal variance with pedigree 0.1332, pedigree (2,3,5,5,1)

## Extrapolations
none This dataset has been copied from an original dataset covering the geography CH. The uncertainty has been adjusted accordingly.

## Review by Arnaud Dauriat 2005-08-30
Passed.
