# polyethylene production, high density, granulate

Dataset: EcoSpold 2, unit process
Geography: RoW
Time period: 2011-01-01 to 2022-12-31
Technology level: current
Classification: ISIC rev.4 ecoinvent: 2013:Manufacture of plastics and synthetic rubber in primary forms
Synonyms: HDPE
Scenario: Business-as-Usual
System model: Substitution, consequential, long-term
Generated by: Thomas Fröhlich
Published in: PlasticsEurope 2016
Database: ecoinvent
isCopyrightProtected: true
accessRestrictedTo: 1

## General comment
The dataset represents the production mix of commercial HDPE production technologies: slurry suspension polymerisation, gas phase polymerisation and solution polymerisation using Ziegler-Natta, Philips, and Metallocene catalysts.
HDPE is mainly produced with the slurry suspension, solution or the gas phase process, which belong to the low-pressure technologies. As catalysts, usually Ziegler-Natta or Phillips-type catalysts are applied, but metallocene-type catalysts can also be used. Due to this wide range of choice of process technology, reactor type, or catalyst type, a typical process for HDPE production cannot be defined.
The suspension polymerisation can be described as precipitation process. The formation of the polymer takes place in a hydrocarbon diluent and under conditions, where the monomer is soluble in the solution. The precipitated polymer, however, is insoluble and forms a fine suspension. The polymer is then separated by centrifugation. The suspension process can be combined with a stirred tank reactor or a loop reactor. Different diluents can be chosen, like C5 to C9 hydrocarbons, hexane, or isobutane.
For solution polymerisation, the hydrocarbon solvent (C9-C6) is kept at high temperature (>130 °C) to ensure that the formed polymer stays dissolved after production. In a subsequent step, the solvent is evaporated and recycled, and the liquid polymer can directly be sent to the extruder.
In the gas phase processes a fluidised bed of polymer particles and catalyst is maintained by a steady gaseous monomer feed from the bottom of the reactor. Polymer powder is continuously extracted at the bottom of the fluidised bed reactor. Unreacted monomer gas from the top is compressed and recycled to the reactor inlet. Catalyst, and co-catalyst if necessary, is also continuously fed to the reactor. Typically Ziegler-Natta catalysts are used for gas phase polymerisation where the catalyst is supported on inert silica particles so that the reaction takes place at the catalyst surface.
After the reaction phase, most of the residual (unreacted) monomers (which are mostly present as gases) are separated from the polymer and are either recycled back into the process or flared of. Depending on the purity of the separated monomers, the gas can either be fed directly back into the production line or the monomers are returned to a purification unit. To limit the accumulation of impurities in the process, usually a small side-stream (purge) of the unreacted gas is sent back to the cracker or to a dedicated purification unit. After polymerisation, the polymer is usually fed di-rectly into a hot melt extruder, where additives can be added to the melted polymer if required. The polymer is then pelletised in an underwater pelletiser. The pelletised product is dried, blended where required and degassed.

## Included activities start
Acitivity starts with monomers and comonomers entering the polymerisation plant. Energy supply is included in terms of heat production inside the battery limits of the plant. Steam and electricity supply is outside the activity.

## Included activities end
Activity ends with polymer granulate leaving the factory.

## Allocation
The polyolefin production itself is regarded as a single-output process since only one polymer type is produced by one installation. All other products of this installation, e.g. monomers being recycled to the cracker or distillation, or hydrocarbons being used thermally, are treated as internal flows replacing the respective input materials (i.e. monomers or energy carriers). Hence, no allocation is needed for the polyolefin production process.

## Geography
Extrapolated from dataset with data for EU27 including Norway and Switzerland. The production volume and uncertainty have been adjusted accordingly.

## Time period
Data was collected for the year 2011, processed in 2013 and published in 2014

## Reference product
- polyethylene, high density, granulate: 1 kg; By-product classification allocatable product; CPC 34710: Polymers of ethylene, in primary forms
  production volume 2.75965e10 kg
  properties: carbon allocation 0.857143 kg, carbon content 0.857143, carbon content, fossil 0.857143, carbon content, non-fossil 0, dry mass 1 kg, heating value, net 42.47 MJ, price 0.739 EUR2005, water content 0, water in wet mass 0 kg, wet mass 1 kg

## Inputs from technosphere
- chemical factory, organics: 4e-10 unit; lognormal variance with pedigree 0.3098, pedigree (2,3,3,4,3)
- chemical, inorganic: 0.000248455 kg; lognormal variance with pedigree 0.0035, pedigree (3,3,5,5,3)
  properties: carbon content, fossil 0.003, dry mass 1 kg, wet mass 1 kg
- chemical, organic: 0.0217391 kg; lognormal variance with pedigree 0.0035, pedigree (3,3,5,5,3)
  properties: carbon content, fossil 0.628, dry mass 1 kg, heating value, net 19.03 MJ, wet mass 1 kg
- chromium oxide, flakes: 0.000148319 kg; lognormal variance with pedigree 0.0035, pedigree (3,3,5,5,3)
  properties: dry mass 1 kg, wet mass 1 kg
- compressed air, 600 kPa gauge: 0.0657509 m3; lognormal variance with pedigree 0.0035, pedigree (3,3,5,5,3)
- electricity, medium voltage: 0.0411882, 0.00154106, 0.0195797, 0.33983, 0.0285347, 0.00152944 kWh (6 suppliers, which the file names only by identifier); sum of these 0.432203 kWh; lognormal variance with pedigree 0.0035, pedigree (3,3,5,5,3)
- ethylene: 0.500905, 0.500905 kg (2 suppliers, which the file names only by identifier); sum of these 1.00181 kg; lognormal variance with pedigree 0.0035, pedigree (3,3,5,5,3)
  properties: carbon content, fossil 0.857143, dry mass 1 kg, heating value, net 43.22 MJ, wet mass 1 kg
- hazardous waste, for incineration: -0.000546967 kg; lognormal variance with pedigree 0.0049, pedigree (3,3,2,5,3)
  properties: carbon content, fossil 0.554667, dry mass 0.75 kg, heating value, net 17 MJ, water content 0.333333, wet mass 1 kg
- heat, from steam, in chemical industry: 1.12086 MJ; lognormal variance with pedigree 0.0035, pedigree (3,3,5,5,3)
  properties: heating value, net 1 MJ
- hydrogen, liquid: 0.000242554 kg; lognormal variance with pedigree 0.0035, pedigree (3,3,5,5,3)
  properties: dry mass 1 kg, heating value, net 120.21 MJ, wet mass 1 kg
- natural gas, high pressure: 0.000235123, 4.86609e-5, 4.51083e-5, 1.27035e-5, 9.76448e-5, 2.80554e-5, 1.78711e-5, 1.95397e-5, 1.18423e-5, 1.39954e-5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 m3 (24 suppliers, which the file names only by identifier); sum of these 0.00340484 m3; lognormal variance with pedigree 0.0035, pedigree (3,3,5,5,3)
  properties: carbon content, fossil 0.695187, dry mass 1 kg, heating value, net 36 MJ, wet mass 1 kg
- nitrogen, liquid: 0.104856 kg; lognormal variance with pedigree 0.0035, pedigree (3,3,5,5,3)
  properties: dry mass 1 kg, wet mass 1 kg
- propylene: 1.00643e-5, 1.00643e-5 kg (2 suppliers, which the file names only by identifier); sum of these 2.01285e-5 kg; lognormal variance with pedigree 0.0035, pedigree (3,3,5,5,3)
  properties: carbon content, fossil 0.857143, dry mass 1 kg, heating value, net 43.22 MJ, wet mass 1 kg
- solvent, organic: 0.00622233 kg; lognormal variance with pedigree 0.0035, pedigree (3,3,5,5,3)
  properties: carbon content, fossil 0.63072, dry mass 1 kg, heating value, net 19.11 MJ, wet mass 1 kg
- spent solvent mixture: -0.000383364 kg; lognormal variance with pedigree 0.0049, pedigree (3,3,2,5,3)
  properties: carbon content, fossil 0.571257, dry mass 0.835 kg, heating value, net 21.7 MJ, water content 0.197605, wet mass 1 kg
- titanium tetrachloride: 2.84582e-5 kg; lognormal variance with pedigree 0.0035, pedigree (3,3,5,5,3)
  properties: dry mass 1 kg, wet mass 1 kg
- waste plastic, mixture: -0.000157661, -0.00110372, -4.13173e-6, -4.35105e-6, -7.96694e-7, -1.05343e-5, -1.75778e-6 kg (7 suppliers, which the file names only by identifier); sum of these -0.00128295 kg; lognormal variance with pedigree 0.0049, pedigree (3,3,2,5,3)
  properties: carbon content, fossil 0.747344, dry mass 0.847 kg, heating value, net 30.79 MJ, water content 0.180638, wet mass 1 kg
- wastewater, average: -0.000686292, -2.44346e-6 m3 (2 suppliers, which the file names only by identifier); sum of these -0.000688735 m3; lognormal variance with pedigree 0.0434, pedigree (3,3,2,5,3)
  properties: carbon content, non-fossil 0.194039, dry mass 0.346837 kg, water content 2882.2, wet mass 1000 kg
- wastewater, unpolluted: -0.0184448 m3; lognormal variance with pedigree 0.0049, pedigree (3,3,2,5,3)
  properties: carbon content, fossil 0.00178991, carbon content, non-fossil 0.00178991, dry mass 0.337476 kg, water content 2962.17, wet mass 1000 kg

## Inputs from nature
- Water, cooling, unspecified natural origin [natural resource, in water]: 0.0229594 m3; lognormal variance with pedigree 0.0035, pedigree (3,3,5,5,3)
- Water, unspecified natural origin [natural resource, in water]: 0.000771202 m3; lognormal variance with pedigree 0.0035, pedigree (3,3,5,5,3)

## Emissions to nature
- Carbon dioxide, fossil [air, unspecified]: 0.0349048 kg; lognormal variance with pedigree 0.0035, pedigree (3,3,5,5,3)
- Carbon monoxide, fossil [air, unspecified]: 6.71682e-5 kg; lognormal variance with pedigree 0.6534, pedigree (3,3,5,5,3)
- Chromium III [air, unspecified]: 1.51703e-8 kg; lognormal variance with pedigree 0.6534, pedigree (3,3,5,5,3)
- Dinitrogen monoxide [air, unspecified]: 7.03777e-6 kg; lognormal variance with pedigree 0.0429, pedigree (3,3,5,5,3)
- Ethylene [air, unspecified]: 0.000258169 kg; lognormal variance with pedigree 0.1234, pedigree (3,3,5,5,3)
- Hydrogen [air, unspecified]: 1.39234e-7 kg; lognormal variance with pedigree 0.0434, pedigree (3,3,5,5,3)
- Methane, fossil [air, unspecified]: 1.28343e-6 kg; lognormal variance with pedigree 0.0434, pedigree (3,3,5,5,3)
- NMVOC, non-methane volatile organic compounds [air, unspecified]: 0.000244731 kg; lognormal variance with pedigree 0.0429, pedigree (3,3,5,5,3)
- Nitrogen oxides [air, unspecified]: 1.23805e-5 kg; lognormal variance with pedigree 0.0429, pedigree (3,3,5,5,3)
- Particulate Matter, > 10 um [air, unspecified]: 5.89462e-6 kg; lognormal variance with pedigree 0.0434, pedigree (3,3,5,5,3)
- Particulate Matter, > 2.5 um and < 10um [air, unspecified]: 1.42026e-6 kg; lognormal variance with pedigree 0.1234, pedigree (3,3,5,5,3)
- Sulfur dioxide [air, unspecified]: 7.26481e-8 kg; lognormal variance with pedigree 0.004, pedigree (3,3,5,5,3)
- Water [air, unspecified]: 0.00459708 m3; lognormal variance with pedigree 0.0109, pedigree (3,3,5,5,3)
- AOX, Adsorbable Organic Halogen [water, unspecified]: 2.72839e-8 kg; lognormal variance with pedigree 0.0429, pedigree (3,3,5,5,3)
- Aluminium III [water, unspecified]: 1.72561e-6 kg; lognormal variance with pedigree 0.6534, pedigree (3,3,5,5,3)
- Ammonium [water, unspecified]: 2.26419e-7 kg; lognormal variance with pedigree 0.0434, pedigree (3,3,5,5,3)
- Chloride [water, unspecified]: 7.95696e-5 kg; lognormal variance with pedigree 0.0434, pedigree (3,3,5,5,3)
- Chromium III [water, unspecified]: 9.25552e-9 kg; lognormal variance with pedigree 0.6534, pedigree (3,3,5,5,3)
- Copper ion [water, unspecified]: 2.52681e-9 kg; lognormal variance with pedigree 0.6534, pedigree (3,3,5,5,3)
- Fluoride [water, unspecified]: 1.99718e-7 kg; lognormal variance with pedigree 0.0434, pedigree (3,3,5,5,3)
- Nickel II [water, unspecified]: 6.89195e-11 kg; lognormal variance with pedigree 0.6534, pedigree (3,3,5,5,3)
- Nitrate [water, unspecified]: 3.29905e-7 kg; lognormal variance with pedigree 0.0434, pedigree (3,3,5,5,3)
- Nitrogen, organic bound [water, unspecified]: 2.15726e-6 kg; lognormal variance with pedigree 0.0434, pedigree (3,3,5,5,3)
- Phosphorus [water, unspecified]: 8.24209e-7 kg; lognormal variance with pedigree 0.0434, pedigree (3,3,5,5,3)
- Sulfate [water, unspecified]: 9.8587e-5 kg; lognormal variance with pedigree 0.0434, pedigree (3,3,5,5,3)
- Suspended solids, unspecified [water, unspecified]: 0.000105564 kg; lognormal variance with pedigree 0.0429, pedigree (3,3,5,5,3)
- Zinc II [water, unspecified]: 2.88745e-7 kg; lognormal variance with pedigree 0.6534, pedigree (3,3,5,5,3)

## Sampling procedure
Extrapolated from European data. Questionnaires sent out to all production units in Europe operated by PlasticEurope member companies.

## Extrapolations
This dataset has been created as a copy of the original dataset covering the geography RER, i.e., Europe. Annual production volume(s) and uncertainty have been adjusted accordingly. It is important to note that original RER dataset represents the average production mix, composed of several different processes/technologies, in Europe in the year of reference. It might not reflect the actual global production mix and should hence only be used as a proxy.

## Review by Eric Johnson 2018-09-19
Thanks to the authors for prompt, thoughtful responses to review comments.
These datasets are disaggregated, a huge step forward from the ones they replace.
Nonetheless, in time, it would be desirable to have datasets for each major process, rather than European averages of several processes. This should be the goal.
