# pitch despergents production, in paper production

Dataset: EcoSpold 2, unit process
Geography: RoW
Time period: 2000-01-01 to 2022-12-31
Technology level: current
Classification: EcoSpold01Categories: chemicals/inorganics
Classification: ISIC rev.4 ecoinvent: 2011:Manufacture of basic chemicals
Tags: ConvertedDataset
Scenario: Business-as-Usual
System model: Substitution, consequential, long-term
Generated by: Roland Hischier
Published in: Hischier R. 2007
Database: ecoinvent
isCopyrightProtected: true
accessRestrictedTo: 1

## General comment
The functional unit represent 1 kg of pitch despergents. Very large uncertainty of the process data, as only a mixture of different materials is included.
[This dataset was already contained in the ecoinvent database version 2. It was not individually updated during the transfer to ecoinvent version 3. Life Cycle Impact Assessment results may still have changed, as they are affected by changes in the supply chain, i.e. in other datasets. This dataset was generated following the ecoinvent quality guidelines for version 2. It may have been subject to central changes described in the ecoinvent version 3 change report (http://www.ecoinvent.org/database/ecoinvent-version-3/reports-of-changes/), and the results of the central updates were reviewed extensively. The changes added e.g. consistent water flows and other information throughout the database. The documentation of this dataset can be found in the ecoinvent reports of version 2, which are still available via the ecoinvent website. The change report linked above covers all central changes that were made during the conversion process.]

## Included activities end
Mixture of three different examples for the pitch despergent (aluminium sulphate, talc, latex). Only input of mentioned substances is taken into account.

## Geography
Data used has no specific geographical origin (raw materials represented by typical examples). Data are used as European average data.

## Technology
equal split to three different substances without any further inputs/outputs

## Reference product
- pitch despergents, in paper production: 1 kg; By-product classification allocatable product; CPC 34: Basic chemicals
  production volume 2.67763 kg
  properties: carbon allocation 0.290994 kg, carbon content 0.290994, carbon content, fossil 0.290994, carbon content, non-fossil 0, dry mass 1 kg, heating value, net 8.82 MJ, price 0.86 EUR2005, water content 0, water in wet mass 0 kg, wet mass 1 kg

## Inputs from technosphere
- aluminium sulfate, powder: 0.333 kg; lognormal variance with pedigree 0.12, pedigree (5,5,5,5,3)
  properties: dry mass 1 kg, wet mass 1 kg
- latex: 0.333 kg; lognormal variance with pedigree 0.12, pedigree (5,5,5,5,3)
  properties: carbon content, fossil 0.872983, dry mass 1 kg, heating value, net 26.45 MJ, wet mass 1 kg
- malusil: 0.333 kg; lognormal variance with pedigree 0.12, pedigree (5,5,5,5,3)
  properties: dry mass 1 kg, wet mass 1 kg

## Sampling procedure
see technology

## Extrapolations
This dataset has been copied from an original dataset covering the geography RER. The uncertainty has been adjusted accordingly.

## Review by Hans-Jörg Althaus 2003-07-02
passed
