# ethoxylated alcohol (AE11) production, palm oil

Dataset: EcoSpold 2, unit process
Geography: RoW
Time period: 1992-01-01 to 2022-12-31
Technology level: current
Classification: EcoSpold01Categories: washing agents/tensides
Classification: ISIC rev.4 ecoinvent: 2023:Manufacture of soap and detergents, cleaning and polishing preparations, pe
Tags: ConvertedDataset
Scenario: Business-as-Usual
System model: Substitution, consequential, long-term
Share of production covered: 40 %
Generated by: Rainer Zah
Published in: Zah R. 2007
Database: ecoinvent
isCopyrightProtected: true
accessRestrictedTo: 1

## General comment
data based on the ECOSOL study of the European surfactant industry. Allocations in multioutput processes were made, using the relative mass outputs of products.
[This dataset was already contained in the ecoinvent database version 2. It was not individually updated during the transfer to ecoinvent version 3. Life Cycle Impact Assessment results may still have changed, as they are affected by changes in the supply chain, i.e. in other datasets. This dataset was generated following the ecoinvent quality guidelines for version 2. It may have been subject to central changes described in the ecoinvent version 3 change report (http://www.ecoinvent.org/database/ecoinvent-version-3/reports-of-changes/), and the results of the central updates were reviewed extensively. The changes added e.g. consistent water flows and other information throughout the database. The documentation of this dataset can be found in the ecoinvent reports of version 2, which are still available via the ecoinvent website. The change report linked above covers all central changes that were made during the conversion process.]

## Included activities end
This module contains material and energy input, transport efforts, production of waste and emissions for the production of alcohol etoxylate out of fatty alcohols and ethylene oxide. Infrastructure has been estimated. No water consumption included.

## Geography
Data based on the European ethoxylated alcohols production

## Technology
Alcohol ethoxylates (AE) are produced by the reaction of fatty alcohols with ethylene oxide leading to a condensation of polyethylene glycolether groups on the alcohol chains. The fatty alcohols can be derived from petrochemical, palm kernel, or coconut oil. The reaction takes place at temperatures ranging from 150°C to 200°C. The grade of ethoxylation, e.g. the specific number of polyether units condensed to the alcohol chains, is controlled by the concentration of ethylene oxide in the ethoxylation process.
This is an average technology for the production of AE representing typical European production mix in the mid 90s.
Reference:
Schul W. (1995) A Life-Cycle Inventory for the Production of Detergent Range Alcohol Ethoxylates in Europe. In: Tenside, Surfactants, Detergents, 32(2), pp. 171-192.
Stalmans M., Berenbold H., Berna J. L., Cavalli L., Dillarstone A., Franke M., Hirsinger F., Janzen D., Kosswig K., Postlethwaite D., Rappert T., Renta C., Scharer D., Schick K.-P., Schul W., Thomas H. and Sloten R. V. (1995) European Life-Cycle Inventory for Detergent Surfactants Production. In: Tenside, Surfactants, Detergents, 32(2), pp. 84-109

## Time period
data of published literature

## Reference product
- ethoxylated alcohol (AE11): 1 kg; By-product classification allocatable product; CPC 353: Soap, cleaning preparations, perfumes and toilet preparations
  production volume 7.1862e6 kg
  properties: carbon allocation 0.618613 kg, carbon content 0.618613, carbon content, fossil 0.378041, carbon content, non-fossil 0.240572, dry mass 1 kg, heating value, net 18.74 MJ, price 1.55061 EUR2005, water content 0, water in wet mass 0 kg, wet mass 1 kg

## Inputs from technosphere
- chemical factory, organics: 4e-10 unit; lognormal variance with pedigree 0.3152, pedigree (2,3,5,5,1)
- electricity, medium voltage: 0.00594661, 0.000222493, 0.00282685, 0.0490635, 0.00411974, 0.000220816 kWh (6 suppliers, which the file names only by identifier); sum of these 0.0624 kWh; lognormal variance with pedigree 0.0152, pedigree (2,3,5,5,1)
- ethylene oxide: 0.652 kg; lognormal variance with pedigree 0.0152, pedigree (2,3,5,5,1)
  properties: carbon content, fossil 0.545455, dry mass 1 kg, heating value, net 27.53 MJ, wet mass 1 kg
- fatty alcohol: 0.342 kg; lognormal variance with pedigree 0.0152, pedigree (2,3,5,5,1)
  properties: carbon content, fossil 0.0408973, carbon content, non-fossil 0.743434, dry mass 1 kg, heating value, net 41.01 MJ, wet mass 1 kg
- heat, district or industrial, natural gas: 0.0316191, 0.208381 MJ (2 suppliers, which the file names only by identifier); sum of these 0.24 MJ; lognormal variance with pedigree 0.0152, pedigree (2,3,5,5,1)
  properties: heating value, net 1 MJ
- heat, district or industrial, other than natural gas: 0.000801842, 0.459198 MJ (2 suppliers, which the file names only by identifier); sum of these 0.46 MJ; lognormal variance with pedigree 0.0152, pedigree (2,3,5,5,1)
  properties: heating value, net 1 MJ
- nitrogen, liquid: 0.019 kg; lognormal variance with pedigree 0.0152, pedigree (2,3,5,5,1)
  properties: dry mass 1 kg, wet mass 1 kg

## Emissions to nature
- Aldehydes, unspecified [air, urban air close to ground]: 1.19e-5 kg; lognormal variance with pedigree 0.1352, pedigree (2,3,5,5,1)
- Carbon dioxide, fossil [air, urban air close to ground]: 0.0108 kg; lognormal variance with pedigree 0.0152, pedigree (2,3,5,5,1)
- Carbon dioxide, non-fossil [air, urban air close to ground]: 0.223 kg; lognormal variance with pedigree 0.0152, pedigree (2,3,5,5,1)
- Carbon monoxide, fossil [air, urban air close to ground]: 3.25e-5 kg; lognormal variance with pedigree 0.6652, pedigree (2,3,5,5,1)
- Methane, fossil [air, urban air close to ground]: 0.00782 kg; lognormal variance with pedigree 0.0252, pedigree (2,3,5,5,1)
- NMVOC, non-methane volatile organic compounds [air, urban air close to ground]: 0.00303 kg; lognormal variance with pedigree 0.0552, pedigree (2,3,5,5,1)
- Nitrogen oxides [air, urban air close to ground]: 0.000115 kg; lognormal variance with pedigree 0.0552, pedigree (2,3,5,5,1)
- Particulate Matter, > 10 um [air, urban air close to ground]: 0.00108 kg; lognormal variance with pedigree 0.0552, pedigree (2,3,5,5,1)
- Sulfur dioxide [air, urban air close to ground]: 0.000374 kg; lognormal variance with pedigree 0.0152, pedigree (2,3,5,5,1)
- Acidity, unspecified [water, surface water]: 4.4e-7 kg; lognormal variance with pedigree 0.0552, pedigree (2,3,5,5,1)
- Ammonium [water, surface water]: 1.52e-9 kg; lognormal variance with pedigree 0.0552, pedigree (2,3,5,5,1)
- BOD5, Biological Oxygen Demand [water, surface water]: 0.000956 kg; lognormal variance with pedigree 0.0552, pedigree (2,3,5,5,1)
- COD, Chemical Oxygen Demand [water, surface water]: 0.00177 kg; lognormal variance with pedigree 0.0552, pedigree (2,3,5,5,1)
- Chromium III [water, surface water]: 7.24e-7 kg; lognormal variance with pedigree 0.6652, pedigree (2,3,5,5,1)
- DOC, Dissolved Organic Carbon [water, surface water]: 0.000655556 kg; lognormal variance with pedigree 0.0552, pedigree (2,3,5,5,1)
- Dissolved solids [water, surface water]: 0.00167 kg; lognormal variance with pedigree 0.0552, pedigree (2,3,5,5,1)
- Hydrocarbons, unspecified [water, surface water]: 5.68e-8 kg; lognormal variance with pedigree 0.3152, pedigree (2,3,5,5,1)
- Iron ion [water, surface water]: 6.15e-9 kg; lognormal variance with pedigree 0.6652, pedigree (2,3,5,5,1)
- Nitrogen [water, surface water]: 3.28e-5 kg; lognormal variance with pedigree 0.6652, pedigree (2,3,5,5,1)
- Oils, unspecified [water, surface water]: 1.23e-5 kg; lognormal variance with pedigree 0.3152, pedigree (2,3,5,5,1)
- Phenol [water, surface water]: 9.47e-10 kg; lognormal variance with pedigree 0.3152, pedigree (2,3,5,5,1)
- Suspended solids, unspecified [water, surface water]: 0.000214 kg; lognormal variance with pedigree 0.0552, pedigree (2,3,5,5,1)
- TOC, Total Organic Carbon [water, surface water]: 0.000655556 kg; lognormal variance with pedigree 0.0552, pedigree (2,3,5,5,1)
- Zinc II [water, surface water]: 1.79e-7 kg; lognormal variance with pedigree 0.6652, pedigree (2,3,5,5,1)

## Sampling procedure
data out of ECOSOL study of European Surfactant Industry. Common translation rules used, reported in Chemical report (Althaus et al. 2003).

## Extrapolations
see technology This dataset has been copied from an original dataset covering the geography RER. The uncertainty has been adjusted accordingly.

## Review by Heiko Kunst 2003-08-06
Passed.

## Review by Emilia Moreno Ruiz 2017-08-09
This dataset was additionally reviewed in a separate review process by Eric Johnson of Atlantic Consulting as well as Emilia Moreno Ruiz and Gregor Wernet of ecoinvent.
