# treatment of drilling waste, landfarming

Dataset: EcoSpold 2, unit process
Geography: RoW
Time period: 2000-01-01 to 2022-12-31
Technology level: current
Classification: EcoSpold01Categories: waste management/landfarming
Classification: ISIC rev.4 ecoinvent: 3821:Treatment and disposal of non-hazardous waste
Tags: Treatment; ConvertedDataset
Scenario: Business-as-Usual
System model: Substitution, consequential, long-term
Generated by: Gabor Doka (obsolete)
Published in: Doka G. 2007
Database: ecoinvent
isCopyrightProtected: true
accessRestrictedTo: 1

## General comment
Inventoried waste contains 100% drilling waste; .
waste composition (wet, in ppm): upper heating value 0.773 MJ/kg; H2O 714700; O 100000; H 5000; C 30000; S 6000; N n.a.; P 500; B 100; Cl 35000; Br n.a.; F 500; I n.a.; Ag n.a.; As 4; Ba 5000; Cd n.a.; Co n.a.; Cr 50; Cu n.a.; Hg n.a.; Mn 400; Mo n.a.; Ni n.a.; Pb n.a.; Sb n.a.; Se n.a.; Sn n.a.; V n.a.; Zn 150; Be n.a.; Sc n.a.; Sr 100; Ti n.a.; Tl n.a.; W n.a.; Si 1000; Fe 20000; Ca 40000; Al 10000; K 3500; Mg 8000; Na 20000;
Share of carbon in waste that is biogenic 0%.
[This dataset was already contained in the ecoinvent database version 2. It was not individually updated during the transfer to ecoinvent version 3. Life Cycle Impact Assessment results may still have changed, as they are affected by changes in the supply chain, i.e. in other datasets. This dataset was generated following the ecoinvent quality guidelines for version 2. It may have been subject to central changes described in the ecoinvent version 3 change report (http://www.ecoinvent.org/database/ecoinvent-version-3/reports-of-changes/), and the results of the central updates were reviewed extensively. The changes added e.g. consistent water flows and other information throughout the database. The documentation of this dataset can be found in the ecoinvent reports of version 2, which are still available via the ecoinvent website. The change report linked above covers all central changes that were made during the conversion process.]

## Included activities end
direct emissions from landfarming applications (100% to industrial soil). Burden for spreading process.

## Technology
direct spreading on industrial areas. No crop growing.

## Time period
Waste composition as given in literature reference.

## Reference product
- drilling waste: -1 kg; By-product classification Waste; CPC 39990: Other wastes n.e.c.
  production volume 59.52 kg
  properties: carbon allocation 0.03 kg, carbon content 0.105263, carbon content, fossil 0.105263, carbon content, non-fossil 0, dry mass 0.285 kg, heating value, net 0 MJ, price 0 EUR2005, water content 2.50877, water in wet mass 0.715 kg, wet mass 1 kg

## Inputs from technosphere
- liquid manure spreading, by vacuum tanker: 0.001 m3; lognormal variance with pedigree 0.11, pedigree (5,5,5,5,4)

## Emissions to nature
- Aluminium III [soil, industrial]: 0.01 kg; lognormal variance with pedigree 0.372, pedigree (1,1,5,5,1)
- Arsenic ion [soil, industrial]: 4e-6 kg; lognormal variance with pedigree 1.392, pedigree (1,1,5,5,1)
- Barium II [soil, industrial]: 0.005 kg; lognormal variance with pedigree 0.452, pedigree (1,1,5,5,1)
- Boron [soil, industrial]: 0.0001 kg; lognormal variance with pedigree 0.962, pedigree (1,1,5,5,1)
- Calcium [soil, industrial]: 0.04 kg; lognormal variance with pedigree 0.212, pedigree (1,1,5,5,1)
- Carbon [soil, industrial]: 0.03 kg; lognormal variance with pedigree 0.242, pedigree (1,1,5,5,1)
- Chloride [soil, industrial]: 0.035 kg; lognormal variance with pedigree 0.222, pedigree (1,1,5,5,1)
- Chromium III [soil, industrial]: 5e-5 kg; lognormal variance with pedigree 1.052, pedigree (1,1,5,5,1)
- Fluoride [soil, industrial]: 0.0005 kg; lognormal variance with pedigree 0.752, pedigree (1,1,5,5,1)
- Iron ion [soil, industrial]: 0.02 kg; lognormal variance with pedigree 0.292, pedigree (1,1,5,5,1)
- Magnesium [soil, industrial]: 0.008 kg; lognormal variance with pedigree 0.392, pedigree (1,1,5,5,1)
- Manganese II [soil, industrial]: 0.0004 kg; lognormal variance with pedigree 0.782, pedigree (1,1,5,5,1)
- Phosphorus [soil, industrial]: 0.0005 kg; lognormal variance with pedigree 0.752, pedigree (1,1,5,5,1)
- Potassium I [soil, industrial]: 0.0035 kg; lognormal variance with pedigree 0.502, pedigree (1,1,5,5,1)
- Silicon [soil, industrial]: 0.001 kg; lognormal variance with pedigree 0.662, pedigree (1,1,5,5,1)
- Sodium [soil, industrial]: 0.02 kg; lognormal variance with pedigree 0.292, pedigree (1,1,5,5,1)
- Strontium [soil, industrial]: 0.0001 kg; lognormal variance with pedigree 0.962, pedigree (1,1,5,5,1)
- Sulfur [soil, industrial]: 0.006 kg; lognormal variance with pedigree 0.432, pedigree (1,1,5,5,1)
- Zinc II [soil, industrial]: 0.00015 kg; lognormal variance with pedigree 0.002, pedigree (1,1,5,5,1)

## Sampling procedure
Waste compositions from literature data.

## Extrapolations
Spreading process approximated with vacuum tank spreader This dataset has been copied from an original dataset covering the geography CH. The uncertainty has been adjusted accordingly.

## Review by Niels Jungbluth 2003-07-31
Passed.
