# hard coal, import from RLA

Dataset: EcoSpold 2, unit process
Geography: Europe, without Russia and Turkey
Time period: 2015-01-01 to 2022-12-31
Technology level: current
Classification: ISIC rev.4 ecoinvent: 0510:Mining of hard coal
Scenario: Business-as-Usual
System model: Substitution, consequential, long-term
Generated by: Florentine Brunner
Database: ecoinvent
isCopyrightProtected: true
accessRestrictedTo: 1

## General comment
This dataset describes the transport needed for an average export of hard coal from Latin America to Europe.The average transport distance for export coal from Latin America (mostly from Colombia) is estimated to be 800km. This corresponds to the rail transport of coal between the city of La Dorada in the mining area of central Colombia and the port of Santa Maria at the Colombian Coast (VDKI, 2017). The average transport distance for import coal to Latin America is assumed to be 200km, also by rail. Only the balance of 600km is used here, as 200km are already covered in the market for hard coal, RLA. The transport via transoceanic freight ship is a rough estimate. Average coal losses and related emissions during transport and storage are included. The latter are based on generic estimates as no geography-specific data was available. Trade volumes are based on 2015 import data according to the United Nations (comtrade.org).
Note: Discrepancies of hard coal trade volumes between different statistical sources as well as between import and export statistics of the same source are primarily due to differences in coal classification methodologies, which are not uniform on a global basis. They also occur because of coal in-transit, coal that is unaccounted for, and reporting discrepancies by importing and exporting countries.

## Included activities start
Starting at the gate of the hard coal mine, this dataset includes the transport, re-loading and storage specific to coal exports/imports in the respective geographies. This means it includes 1.) any transport between the hard coal mine and the border of the exporting country which is required in addition to the transport needs of the domestic “market for hard coal”, 2.) the transport through transit countries (if applicable), 3.) the transoceanic freight shipping (if applicable) and 4.) any transport between the border of the importing country and the consumers which is required in addition to the transport needs of the domestic coal market.

## Included activities end
The activity ends with the delivery of hard coal to the domestic market of the importing country.

## Geography
This datasets models the import of hard coal from Latin America to Europe.

## Technology
Transport of hard coal by train and transoceanic ship.

## Time period
The trade volumes represented in this dataset are based on 2015 UN trade statistics retrieved online from comtrade.org.

## Reference product
- hard coal: 1 kg; By-product classification allocatable product; CPC 11010: Hard coal
  production volume 5.76e10 kg
  properties: carbon allocation 0.7943 kg, carbon content 0.845, carbon content, fossil 0.845, carbon content, non-fossil 0, dry mass 0.94 kg, heating value, net 27.91 MJ, price 0.036 EUR2005, water content 0.0638298, water in wet mass 0.06 kg, wet mass 1 kg

## Inputs from technosphere
- hard coal: 1.002 kg; lognormal variance with pedigree 0.0532, pedigree (3,5,5,5,2)
  properties: carbon content, fossil 0.845, dry mass 0.94 kg, heating value, net 27.91 MJ, water content 0.0638298, wet mass 1 kg
- transport, freight train: 0.6 metric ton*km; lognormal variance with pedigree 0.1201, pedigree (1,2,3,1,1)
- transport, freight, sea, bulk carrier for dry goods: 9 metric ton*km; lognormal variance with pedigree 0.1226, pedigree (3,3,3,1,1)

## Emissions to nature
- Particulate Matter, > 10 um [air, unspecified]: 0.002 kg; lognormal variance with pedigree 0.0912, pedigree (2,5,5,5,2)

## Sampling procedure
Literature research. The trade volumes were retrieved from UN statistics at comtrade.org for the commodity codes 270111 (Coal; anthracite, whether or not pulverised, but not agglomerated), 270112 (Coal; bituminous, whether or not pulverised, but not agglomerated), 270119 (Coal; (other than anthracite and bituminous), whether or not pulverised but not agglomerated.
