# glass fibre reinforced plastic production, polyamide, injection moulded

Dataset: EcoSpold 2, unit process
Geography: RoW
Time period: 2000-01-01 to 2022-12-31
Technology level: current
Classification: EcoSpold01Categories: plastics/others
Classification: ISIC rev.4 ecoinvent: 2220:Manufacture of plastics products
Synonyms: GFK; GRP
Tags: ConvertedDataset
Scenario: Business-as-Usual
System model: Substitution, consequential, long-term
Generated by: Niels Jungbluth
Published in: Kellenberger D. 2007
Database: ecoinvent
isCopyrightProtected: true
accessRestrictedTo: 1

## General comment
Based on assumptions for material uses. Data for processing and infrastructure are assumed with generic inventory.
The glass-fibre content is assumed to be 30%.
[This dataset was already contained in the ecoinvent database version 2. It was not individually updated during the transfer to ecoinvent version 3. Life Cycle Impact Assessment results may still have changed, as they are affected by changes in the supply chain, i.e. in other datasets. This dataset was generated following the ecoinvent quality guidelines for version 2. It may have been subject to central changes described in the ecoinvent version 3 change report (http://www.ecoinvent.org/database/ecoinvent-version-3/reports-of-changes/), and the results of the central updates were reviewed extensively. The changes added e.g. consistent water flows and other information throughout the database. The documentation of this dataset can be found in the ecoinvent reports of version 2, which are still available via the ecoinvent website. The change report linked above covers all central changes that were made during the conversion process.]

## Included activities end
Gate to gate inventory for the injection moulding of glass fibre with polyamide resin including material inputs, process and infrastructure.

## Geography
Information from one manufacturer.

## Technology
Injection moulding of glass fibre.

## Time period
Time of publication

## Reference product
- glass fibre reinforced plastic, polyamide, injection moulded: 1 kg; By-product classification allocatable product; CPC 36990: Articles of plastics n.e.c.
  production volume 2.67763 kg
  properties: carbon allocation 0.446018 kg, carbon content 0.446018, carbon content, fossil 0.446018, carbon content, non-fossil 0, dry mass 1 kg, price 1.3 EUR2005, water content 0, water in wet mass 0 kg, wet mass 1 kg

## Inputs from technosphere
- chemical, organic: 0.025 kg; lognormal variance with pedigree 0.012, pedigree (4,4,5,5,1)
  properties: carbon content, fossil 0.628, dry mass 1 kg, heating value, net 19.03 MJ, wet mass 1 kg
- injection moulding: 1 kg; lognormal variance with pedigree 0.018, pedigree (4,5,5,5,1)
- nylon 6-6, glass-filled: 1.05 kg; lognormal variance with pedigree 0.03, pedigree (4,4,5,5,3)
  properties: carbon content, fossil 0.446018, dry mass 1 kg, heating value, net 30.9 MJ, wet mass 1 kg
- waste mineral wool, for final disposal: -0.368 kg; lognormal variance with pedigree 0.012, pedigree (4,4,1,5,1)
  properties: dry mass 1 kg, wet mass 1 kg

## Sampling procedure
Personal communication

## Extrapolations
To European average. Background data for polyamide resin were not available. Its use has been approximated with melamine formaldehyde resin. This dataset has been copied from an original dataset covering the geography RER. The uncertainty has been adjusted accordingly.

## Review by Hans-Jörg Althaus 2003-06-10
passed
