# helium, crude stockpiling

Dataset: EcoSpold 2, unit process
Geography: US
Time period: 2005-01-01 to 2022-12-31
Technology level: current
Classification: ISIC rev.4 ecoinvent: 2011:Manufacture of basic chemicals
Scenario: Business-as-Usual
System model: Substitution, consequential, long-term
Generated by: Emilia Moreno Ruiz
Database: ecoinvent
isCopyrightProtected: true
accessRestrictedTo: 1

## General comment
The only helium storage facility curently in operation is the Cliffside Storage Facility (also known as US National Helium Reserve) which is located in the United States, 19km far from Amarillo, Texas.
USGS, Pacheco, N., Helium, 2000 (http://minerals.usgs.gov/minerals/pubs/commodity/helium/330400.pdf, accessed 20130404)
Between 1960 and 1975 the strategy of the United States related to helium was to store this gas for the future uses. This strategy has changed by decision taken in 1996 that helium should no longer be accumulated. The figure below shows the quantities of helium sold versus quantities of helium recovered (USGS). It is obvious, that since 1999 growing amount of helium supplied to the market is coming from the reserves. These reserves are being close to be depleted, which causes lack of helium on the market and subsequently increased price (Reuters, Salmon, F., published 20130328, http://blogs.reuters.com/felix-salmon/2013/03/28/how-helium-is-like-mortgages/, accessed 20130405).
USGS, Pacheco, N., Helium, 2000 (http://minerals.usgs.gov/minerals/pubs/commodity/helium/330400.pdf, accessed 20130404)

## Included activities start
This activity starts with the helium, crude being pumped into the underground storage facility.

## Included activities end
This activity delivers the service of helium, crude stockpiling.

## Technology
This dataset represents very simplified modelling of helium storage. The uncertainty is adjusted accordingly.

## Reference product
- helium, crude: 1 kg; By-product classification allocatable product; CPC 34231: Chemical elements n.e.c.; inorganic acids except phosphoric, nitric and sulphonitric; inorganic oxygen compoun[…]
  production volume 1 kg
  properties: carbon allocation 0 kg, carbon content 0, carbon content, fossil 0, carbon content, non-fossil 0, dry mass 1 kg, price 0 EUR2005, water content 0, water in wet mass 0 kg, wet mass 1 kg

## Inputs from technosphere
- building, hall: -0.00208714 m2; lognormal variance with pedigree 0.2106, pedigree (5,5,5,5,5)
- helium, crude stockpiling: 1 kg
  properties: price 2.53381 EUR2005
- pump station: -1.34327e-7 unit; lognormal variance with pedigree 0.2106, pedigree (5,5,5,5,5)

## Inputs from nature
- Occupation, dump site [natural resource, land]: -0.333943 m2*year; lognormal variance with pedigree 0.121225, pedigree (2,1,4,2,2)
- Transformation, from unspecified [natural resource, land]: -0.00417428 m2; lognormal variance with pedigree 0.121225, pedigree (2,1,4,2,2)
- Transformation, to industrial area [natural resource, land]: -0.00417428 m2; lognormal variance with pedigree 0.121225, pedigree (2,1,4,2,2)
