# fluorine production, liquid

Dataset: EcoSpold 2, unit process
Geography: RoW
Time period: 1999-01-01 to 2022-12-31
Technology level: current
Classification: EcoSpold01Categories: chemicals/inorganics
Classification: ISIC rev.4 ecoinvent: 2011:Manufacture of basic chemicals
Tags: ConvertedDataset
Scenario: Business-as-Usual
System model: Substitution, consequential, long-term
Generated by: Niels Jungbluth
Published in: Althaus H.-J. 2007
Database: ecoinvent
isCopyrightProtected: true
accessRestrictedTo: 1

## General comment
This module investigates the production of fluorine as a basic product for SF6. It is a rough and incomplete inventory which is based on information found in the literature.
[This dataset was already contained in the ecoinvent database version 2. It was not individually updated during the transfer to ecoinvent version 3. Life Cycle Impact Assessment results may still have changed, as they are affected by changes in the supply chain, i.e. in other datasets. This dataset was generated following the ecoinvent quality guidelines for version 2. It may have been subject to central changes described in the ecoinvent version 3 change report (http://www.ecoinvent.org/database/ecoinvent-version-3/reports-of-changes/), and the results of the central updates were reviewed extensively. The changes added e.g. consistent water flows and other information throughout the database. The documentation of this dataset can be found in the ecoinvent reports of version 2, which are still available via the ecoinvent website. The change report linked above covers all central changes that were made during the conversion process.]

## Included activities end
Production of fluorine from hydrogene fluoride. Infrastructure estimated with generic data. Data for raw material KF were not available.

## Geography
Estimation for Europe

## Technology
Electrolysis of KF-2HF (40.68 wt % HF)

## Time period
Time of publication

## Reference product
- fluorine, liquid: 1 kg; By-product classification allocatable product; CPC 34231: Chemical elements n.e.c.; inorganic acids except phosphoric, nitric and sulphonitric; inorganic oxygen compoun[…]
  production volume 2.67763 kg
  properties: carbon allocation 0 kg, carbon content 0, carbon content, fossil 0, carbon content, non-fossil 0, dry mass 1 kg, price 4.03 EUR2005, water content 0, water in wet mass 0 kg, wet mass 1 kg

## Inputs from technosphere
- chemical factory, organics: 4e-10 unit; lognormal variance with pedigree 0.59, pedigree (5,5,5,5,5)
- electricity, medium voltage: 1.45806, 0.0545536, 0.693122, 12.03, 1.01013, 0.0541423 kWh (6 suppliers, which the file names only by identifier); sum of these 15.3 kWh; lognormal variance with pedigree 0.002, pedigree (1,1,5,5,1)
- hydrogen fluoride: 1.14 kg; lognormal variance with pedigree 0.2162, pedigree (3,4,5,5,5)
  properties: dry mass 1 kg, heating value, net 6.06 MJ, wet mass 1 kg

## Emissions to nature
- Hydrogen fluoride [air, unspecified]: 0.001 kg; lognormal variance with pedigree 0.15, pedigree (5,5,5,5,1)

## Sampling procedure
Literature survey

## Extrapolations
From single data. This dataset has been copied from an original dataset covering the geography RER. The uncertainty has been adjusted accordingly.

## Review by Roland Hischier 2003-08-19
Passed.
