# heat and power co-generation, oil

Dataset: EcoSpold 2, unit process
Geography: RoW
Time period: 1980-01-01 to 2022-12-31
Technology level: current
Classification: ISIC rev.4 ecoinvent: 3510:Electric power generation, transmission and distribution
Classification: EcoSpold01Categories: hard coal/power plants
Synonyms: petroleum; heavy fuel oil
Tags: fossil fuels; oil power
Scenario: Business-as-Usual
System model: Substitution, consequential, long-term
Generated by: Karin Treyer
Published in: Jungbluth N. 2003
Database: ecoinvent
isCopyrightProtected: true
accessRestrictedTo: 1

## General comment
This dataset represents the production of high voltage electricity and district heat at a grid-connected oil power plant with a capacity of 500 MW on the world in 2012.
Emissions are in general calculated/estimated based on the fuel oil type S, European quality. This dataset has been built on the basis of oil electricity production datasets in version 2 of the ecoinvent database which were elaborated by N. Jungbluth 2007 (see main publication in modelling and administrative). The values and emissions are a weighted average of emissions in all datasets in version 2 (which are considered as the global values) multiplied with an efficiency scaling factor. The datasets in version 2 were valid for the following countries: AT, BE, CS, CZ, DE, DK, ES, FI, FR, GB, GR, HR, HU, IE, IT, NL, PT, SE, SI, SK. Weighting was made with electricity production data in those countries based on IEA/OECD 2012. Nothing else than the efficiency has been adjusted in this dataset; besides that no new data collection has taken place
Comments:
- sulfur content of the oil is not adapted to local/average conditions.
- CO2 emissions are presented for the combustion and for the flue gas treatment
- Extensive comments on emissions can be found in Jungbluth 2007, on which this dataset is based on.
Emissions to the water are from flue gas treatment. Most of these data come from two power plants in Portugal (EDP 2001) and data from Slowakia
EDP (2001) Environmental Report 2000. Electricidade de Portugal, S.A., Lisboa, PT, retrieved from: www.edp.pt.
Slovenské elektrárne (2002) Environment Report 2001, Bratislave, SK, retrieved from: www.seas.sk.
IEA/OECD. 2010. Electricity Information 2010. International Energy Agency (IEA), Paris Cedex (FR). Part IV. Detailed OECD Electricity And Heat Data.
[This dataset is meant to replace the following datasets:]

## Included activities start
From the constructed power plant ready to produce electricity and from the fuel ready to be used.

## Included activities end
This activity ends with 1MJ of heavy fuel oil burned in power plant with heat and electricity as main products.

This dataset includes all energy use, use of chemicals, emissions to air and water including treatment of flue gasses and effluents. In an oil power plant, water is needed for cooling, feed water for the steam circuit, for the flue gas treatment, or other cleaning. This dataset only considers water use (evaporation) for cooling and steam circuit.

## Technology
Electricity and heat production in a conventional combined heat and power oil power plant with a capacity of 500 MWe

## Time period
The Annual Production Volume is valid for the year 2012.

## Parameters
- average efficiency of oil power plants, country: 0.319 dimensionless; name efficiency_oil_country; lognormal variance with pedigree 0.003325, pedigree (3,2,1,2,2)
  Literature value/calculated value. Net electrical efficiency based on the lower heating value (LHV).
  For all OECD countries, the IEA Electricity information 2014 provides data for the year 2012 on fuel input (TJ, Net calorific value NCV) and gross electricity production (GWh) as well as heat production (TJ) in tables 8 and 9 for each country for electricity only and Combined Heat and Power (CHP) plants each. Together with the information on own use (see parameter "losses"), the net electrical efficiency based on the NCV is calculated.
  For all non-OECD countries, data from the IEA Energy balances of non-OECD countries 2014 have been used. These tables do not always provide information on how much of the electricity has been produced in electricity only and in CHP plants, but often give the total value only.
  IEA. 2014. Electricity Information 2014. ISBN 978-92-64-21692-1. International Energy Agency (IEA), Paris Cedex (FR).
  IEA/OECD. 2014. Energy balances of non-OECD countries 2014. International Energy Agency (IEA), Paris Cedex (FR).
  nan
- average efficiency of oil power plants, global: 0 dimensionless
  Parameter not needed anymore.
- factor: input of MJ for the production of 1 kWh: 11.2853 MJ/kWh; name factor_MJ_kWh; = 1*3.6/efficiency_oil_country; lognormal variance with pedigree 0.0006, pedigree (1,1,1,1,1)
  Calculated value. 3.6 MJ = 1kWh.
  nan
- fraction, cooling water, to air: 0.0159178 dimensionless; name fraction_CW_to_air; = (WConsumption_EP_oil_recirculatingCS*recirculating_CS_fraction_from_allCS+WConsumption_EP_oil_onceT_andCP_CS*once_through_andCP_CS_fractio_from_allCS)/(WWithdrawal_EP_oil_recirculating_CS*recirculating_CS_fraction_from_allCS+WWithdrawal_EP_oil_onceT_andCP_CS*once_through_andCP_CS_fractio_from_allCS); lognormal variance with pedigree 0.092025, pedigree (4,4,3,2,4)
  Calculated value
  nan
- fraction, process water, to air: 0.15 dimensionless; name fraction_PW_to_air; lognormal variance with pedigree 0.092025, pedigree (4,4,3,2,4)
  Literature value. In case when no industry/process specific data are available, default evaporation fraction value is used. This value is 15% and is based on literature (Statistics Canada, 2007 & Shaffer, K.H., 2008, Consumptive water use in the Great Lakes Basin, USGS & Shiklomanov, 2003, World Water Resources at the Beginning of the 21st Century) and has been approved by an expert.
  nan
- fraction, water, completely softened, to air: 0.15 dimensionless; name fraction_WCS_to_air; = fraction_PW_to_air; lognormal variance with pedigree 0.092025, pedigree (4,4,3,2,4)
  Calculated value. See comment in the other parametres present in this dataset. Water, completely softened is considered to be always used as process water, thus process water fractions to air are applied to all water, completely softened input flows to calculate the amount of water consumed in the processes.
  nan
- fraction, water, decarbonised, to air: 0.0159178 dimensionless; name fraction_WDC_to_air; = fraction_CW_to_air; lognormal variance with pedigree 0.092025, pedigree (4,4,3,2,4)
  Calculated value. See comments in the other parametres present in this dataset. Decarbonised water is considered to be always used as cooling water, thus cooling water fractions to air are applied to all carbonised water input flows to calculate the amount of water consumed in the processes.
  nan
- gross electricity production: 1.2788e11 kWh; name gross_electricity; lognormal variance with pedigree 0.0012, pedigree (2,1,1,1,1)
  Literature value/statistics.
  For OECD countries, gross electricity production 2012 with natural gas in electricity plants or CHP plants was taken from the IEA electricity informaiton 2014, country tables 8 and 9.
  For non-OECD countries, these values were found in the Energy balances of non-OECD countries.
  The split of electricity only and CHP plants into conventional and combined cycle plants (see general comment) was made based on information on installed electrical capacity with natural gas as fuel in the individual countries taken from the WEPP database.
  IEA. 2014. Electricity Information 2014. ISBN 978-92-64-21692-1. International Energy Agency (IEA), Paris Cedex (FR).
  IEA/OECD. 2014. Energy balances of non-OECD countries 2014. International Energy Agency (IEA), Paris Cedex (FR).
  WEPP 2014. World Electric Power Plants Database. PLATTS McGraw Hill Financial. http://www.platts.com/products/world-electric-power-plants-database
  nan
- losses from gross electricity production: 0.07 dimensionless; name losses_gross_net; lognormal variance with pedigree 0.017225, pedigree (4,3,1,2,3)
  Literature value. Own use of electricity plants in this country in 2012. The default loss as described by the IEA in the electricity statistic is applied, which is 0.07 (IEA electricity information 2014: The difference between gross and net electricity production is generally observed to be about 7% for conventional thermal stations, 1% for hydro stations and 6% for nuclear.)
  IEA. 2014. Electricity Information 2014. ISBN 978-92-64-21692-1. International Energy Agency (IEA), Paris Cedex (FR).
  nan
- once-through and cooling pond cooling systems as a fraction of all cooling syste: 0.625 dimensionless; name once_through_andCP_CS_fractio_from_allCS; lognormal variance with pedigree 0.092025, pedigree (4,4,3,2,4)
  Calculated as an average of data available for Europe (Floerke, 2008, Future changes of freshwater needs in the electricity production sector) and USA (NERL, 2011, Estimating freshwater needs to meet future thermoelectric generation requirements).
  nan
- recirculating cooling system as a fraction of all cooling systems: 0.375 dimensionless; name recirculating_CS_fraction_from_allCS; lognormal variance with pedigree 0.092025, pedigree (4,4,3,2,4)
  (same comment as for once-through and cooling pond cooling systems as a fraction of all coo)
- relation between the global and the country's efficiency of oil power plants: 0 dimensionless
  Parameter not needed anymore.
- water consumption, electricity production from oil, once-T and coolingP CS: 0.0005 m3/kWh; name WConsumption_EP_oil_onceT_andCP_CS; lognormal variance with pedigree 0.092025, pedigree (4,4,3,2,4)
  Estimated based on literature (Scown, 2011, Water Footprint of U.S. Transportation Fuels, SI).
  nan
- water consumption, electricity production from oil, recirculating CS: 0.0018 m3/kWh; name WConsumption_EP_oil_recirculatingCS; lognormal variance with pedigree 0.092025, pedigree (4,4,3,2,4)
  (same comment as for water consumption, electricity production from oil, once-T and cooling)
- water withdrawal, electricity production from oil, once-T and coolingP CS: 0.098 m3/kWh; name WWithdrawal_EP_oil_onceT_andCP_CS; lognormal variance with pedigree 0.092025, pedigree (4,4,3,2,4)
  (same comment as for water consumption, electricity production from oil, once-T and cooling)
- water withdrawal, electricity production from oil, recirculating CS: 0.0021 m3/kWh; name WWithdrawal_EP_oil_recirculating_CS; lognormal variance with pedigree 0.092025, pedigree (4,4,3,2,4)
  (same comment as for water consumption, electricity production from oil, once-T and cooling)

## Reference product
- heat, district or industrial, other than natural gas: 1 MJ; By-product classification allocatable product; CPC 17300: Steam and hot water
  production volume 2.10806e10 MJ
  properties: carbon allocation 0 kg, carbon content 0, corresponding fuel use, propane, furnace >100kW 0 MJ, exergy 0.1842 MJ, heating value, net 1 MJ, price 0.0106 EUR2005, true value relation 0.1842

## Inputs from technosphere
- ammonia, anhydrous, liquid: 1.57659e-5, 3.06048e-5, 9.49586e-6, 1.43396e-5, 0.000117889 kg (5 suppliers, which the file names only by identifier); sum of these 0.000188095 kg; lognormal variance with pedigree 0.0166, pedigree (2,4,5,5,1)
  properties: dry mass 1 kg, wet mass 1 kg
- bilge oil: -6.96601e-6, -8.7565e-8 kg (2 suppliers, which the file names only by identifier); sum of these -7.05357e-6 kg; lognormal variance with pedigree 0.0438, pedigree (2,3,5,5,1)
  properties: carbon content, fossil 0.84, dry mass 0.1 kg, heating value, net 1.92 MJ, water content 9, wet mass 1 kg
- electricity, high voltage: -0.000138259, -7.09511e-5, -0.000160724, -8.41131e-5, -0.000532994, -0.00105236, -0.000284755, -0.105844, -0.000204106, -0.00348745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 kWh (53 suppliers, which the file names only by identifier); sum of these -0.263724 kWh
  properties: exergy 3.6 MJ, price 0.0977 EUR2005
- fly ash and scrubber sludge: -8.50057e-6, -1.00618e-7 kg (2 suppliers, which the file names only by identifier); sum of these -8.60119e-6 kg; lognormal variance with pedigree 0.0433, pedigree (2,2,5,5,1)
  properties: carbon content, fossil 0.167, dry mass 0.1 kg, water content 9, wet mass 1 kg
- heavy fuel oil: 0.000514431, 0.00273237, 0.0638732, 0.00354294, 0.000198042, 0.000922983, 0.000537465 kg (7 suppliers, which the file names only by identifier); sum of these 0.0723214 kg; lognormal variance with pedigree 0.0433, pedigree (2,2,5,5,1)
  properties: carbon content, fossil 0.849, dry mass 1 kg, heating value, net 41.2 MJ, wet mass 1 kg
- lignite ash: -1.6757e-8, -0.000231233 kg (2 suppliers, which the file names only by identifier); sum of these -0.00023125 kg; lognormal variance with pedigree 0.0438, pedigree (2,3,5,5,1)
  properties: dry mass 1 kg, heating value, net 21.7 MJ, wet mass 1 kg
- limestone, crushed, washed: 3.47238e-5, 0.00407242 kg (2 suppliers, which the file names only by identifier); sum of these 0.00410714 kg; lognormal variance with pedigree 0.0166, pedigree (2,4,5,5,1)
  properties: carbon content, fossil 0.117257, dry mass 0.998 kg, water content 0.00200401, wet mass 1 kg
- municipal solid waste: -3.49096e-8, -1.67107e-9, -4.13814e-5, -6.51054e-8, -5.85112e-8, -3.12993e-8, -5.6965e-9, -9.37568e-9, -1.47434e-8, -2.10691e-8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 kg (13 suppliers, which the file names only by identifier); sum of these -4.16667e-5 kg; lognormal variance with pedigree 0.0038, pedigree (2,3,1,5,1)
  properties: carbon content, fossil 0.171549, carbon content, non-fossil 0.261655, dry mass 0.771 kg, heating value, net 11.74 MJ, water content 0.297017, wet mass 1 kg
- oil power plant, 500MW: 3.69048e-12 unit; lognormal variance with pedigree 0.3506, pedigree (2,5,5,5,1)
- residue from cooling tower: -2.93088e-7, -3.45283e-5 kg (2 suppliers, which the file names only by identifier); sum of these -3.48214e-5 kg; lognormal variance with pedigree 0.0438, pedigree (2,3,5,5,1)
  properties: carbon content, fossil 0.0544233, dry mass 0.7 kg, water content 0.428571, wet mass 1 kg
- waste mineral oil: -1.96803e-6, -0.000208151 kg (2 suppliers, which the file names only by identifier); sum of these -0.000210119 kg; lognormal variance with pedigree 0.0438, pedigree (2,3,5,5,1)
  properties: carbon content, fossil 0.864444, dry mass 0.9 kg, heating value, net 34.7 MJ, water content 0.111111, wet mass 1 kg
- water, completely softened: 0.0303571 kg; lognormal variance with pedigree 0.0439, pedigree (2,2,5,5,2)
  properties: wet mass 1 kg
- water, decarbonised: 0.0509256, 0.00485261, 0.0126265, 0.00061988, 0.080435, 7.89632e-6, 0.0064849 kg (7 suppliers, which the file names only by identifier); sum of these 0.155952 kg; lognormal variance with pedigree 0.0439, pedigree (2,2,5,5,2)
  properties: wet mass 1 kg

## Inputs from nature
- Water, cooling, unspecified natural origin [natural resource, in water]: 0.0189622 m3; lognormal variance with pedigree 0.3432, pedigree (2,3,5,5,1)

## Emissions to nature
- Acetaldehyde [air, urban air close to ground]: 7.20238e-7 kg; lognormal variance with pedigree 0.132, pedigree (1,1,5,5,1)
- Acetic acid [air, urban air close to ground]: 2.93452e-6 kg; lognormal variance with pedigree 0.132, pedigree (1,1,5,5,1)
- Acetone [air, urban air close to ground]: 7.20238e-7 kg; lognormal variance with pedigree 0.132, pedigree (1,1,5,5,1)
- Ammonia [air, urban air close to ground]: 3.57143e-7 kg; lognormal variance with pedigree 1.0433, pedigree (2,2,5,5,2)
- Arsenic ion [air, urban air close to ground]: 2.30357e-8 kg; lognormal variance with pedigree 1.1933, pedigree (2,2,5,5,2)
- Benzene [air, urban air close to ground]: 1.46726e-7 kg; lognormal variance with pedigree 0.1233, pedigree (2,2,5,5,2)
- Benzo(a)pyrene [air, urban air close to ground]: 4.46429e-11 kg; lognormal variance with pedigree 0.3406, pedigree (3,3,5,5,3)
- Beryllium II [air, urban air close to ground]: 1.66071e-10 kg; lognormal variance with pedigree 0.6566, pedigree (3,3,5,5,1)
- Cadmium II [air, urban air close to ground]: 1.10119e-8 kg; lognormal variance with pedigree 1.2433, pedigree (2,2,5,5,2)
- Calcium [air, urban air close to ground]: 8.92857e-8 kg; lognormal variance with pedigree 0.0546, pedigree (3,3,5,5,3)
- Carbon dioxide, fossil [air, unspecified]: 0.00183929 kg; lognormal variance with pedigree 0.0606, pedigree (2,5,5,5,1)
- Carbon dioxide, fossil [air, urban air close to ground]: 0.233631 kg; lognormal variance with pedigree 0.0433, pedigree (2,2,5,5,1)
- Carbon monoxide, fossil [air, urban air close to ground]: 4.97024e-5 kg; lognormal variance with pedigree 0.1933, pedigree (2,2,5,5,2)
- Chromium III [air, urban air close to ground]: 3.9881e-8 kg; lognormal variance with pedigree 1.4533, pedigree (2,2,3,5,2)
- Chromium VI [air, urban air close to ground]: 9.25595e-10 kg; lognormal variance with pedigree 2.2466, pedigree (3,3,5,5,1)
- Cobalt II [air, urban air close to ground]: 1.22024e-7 kg; lognormal variance with pedigree 1.2433, pedigree (2,2,5,5,2)
- Copper ion [air, urban air close to ground]: 1.50595e-7 kg; lognormal variance with pedigree 1.3433, pedigree (2,2,5,5,2)
- Dinitrogen monoxide [air, urban air close to ground]: 1.24405e-5 kg; lognormal variance with pedigree 0.3833, pedigree (2,2,5,5,2)
- Dioxins, measured as 2,3,7,8-tetrachlorodibenzo-p-dioxin [air, urban air close to ground]: 3.125e-14 kg; lognormal variance with pedigree 0.3452, pedigree (2,4,5,5,2)
- Ethanol [air, urban air close to ground]: 1.46726e-6 kg; lognormal variance with pedigree 0.1233, pedigree (2,2,5,5,2)
- Formaldehyde [air, urban air close to ground]: 2.20238e-6 kg; lognormal variance with pedigree 0.1233, pedigree (2,2,5,5,2)
- Hydrocarbons, aliphatic, alkanes, unspecified [air, urban air close to ground]: 2.93452e-6 kg; lognormal variance with pedigree 0.1233, pedigree (2,2,5,5,2)
- Hydrocarbons, aliphatic, unsaturated [air, urban air close to ground]: 1.46726e-7 kg; lognormal variance with pedigree 0.1233, pedigree (2,2,5,5,2)
- Hydrocarbons, aromatic [air, urban air close to ground]: 2.93452e-8 kg; lognormal variance with pedigree 0.1233, pedigree (2,2,5,5,2)
- Hydrochloric acid [air, urban air close to ground]: 1.34226e-7 kg; lognormal variance with pedigree 0.0912, pedigree (2,3,5,5,3)
- Hydrogen fluoride [air, urban air close to ground]: 8.95833e-8 kg; lognormal variance with pedigree 0.0912, pedigree (2,3,5,5,3)
- Iron ion [air, urban air close to ground]: 2.08333e-7 kg; lognormal variance with pedigree 0.6746, pedigree (3,3,5,5,3)
- Lead II [air, urban air close to ground]: 1.10417e-7 kg; lognormal variance with pedigree 1.2433, pedigree (2,2,5,5,2)
- Manganese II [air, urban air close to ground]: 3.83929e-8 kg; lognormal variance with pedigree 1.2433, pedigree (2,2,5,5,2)
- Mercury II [air, urban air close to ground]: 4.46429e-10 kg; lognormal variance with pedigree 1.6633, pedigree (2,2,5,5,2)
- Methane, fossil [air, urban air close to ground]: 1.46726e-5 kg; lognormal variance with pedigree 0.1233, pedigree (2,2,5,5,2)
- Methanol [air, urban air close to ground]: 1.46726e-6 kg; lognormal variance with pedigree 0.1233, pedigree (2,2,5,5,2)
- Molybdenum VI [air, urban air close to ground]: 2.65179e-8 kg; lognormal variance with pedigree 1.2433, pedigree (2,2,5,5,2)
- Nickel II [air, urban air close to ground]: 9.19643e-7 kg; lognormal variance with pedigree 1.2433, pedigree (2,2,5,5,2)
- Nitrogen oxides [air, urban air close to ground]: 0.000729167 kg; lognormal variance with pedigree 0.0447, pedigree (2,2,5,5,1)
- PAH, polycyclic aromatic hydrocarbons [air, urban air close to ground]: 5.17857e-9 kg; lognormal variance with pedigree 0.3246, pedigree (2,4,5,5,3)
- Particulate Matter, < 2.5 um [air, urban air close to ground]: 2.63095e-5 kg; lognormal variance with pedigree 0.3127, pedigree (2,2,5,5,3)
- Particulate Matter, > 10 um [air, urban air close to ground]: 2.5e-5 kg; lognormal variance with pedigree 0.0527, pedigree (2,2,5,5,3)
- Particulate Matter, > 2.5 um and < 10um [air, urban air close to ground]: 1.84821e-5 kg; lognormal variance with pedigree 0.1327, pedigree (2,2,5,5,3)
- Propane [air, urban air close to ground]: 1.46726e-7 kg; lognormal variance with pedigree 0.1233, pedigree (2,2,5,5,2)
- Selenium IV [air, urban air close to ground]: 1.74405e-8 kg; lognormal variance with pedigree 1.2433, pedigree (2,2,5,5,2)
- Sodium [air, urban air close to ground]: 8.86905e-7 kg; lognormal variance with pedigree 0.0646, pedigree (3,3,5,5,3)
- Sulfur dioxide [air, urban air close to ground]: 0.0014256 kg; lognormal variance with pedigree 0.0439, pedigree (2,2,5,5,2)
- Vanadium V [air, urban air close to ground]: 3.33333e-6 kg; lognormal variance with pedigree 1.4233, pedigree (2,2,5,5,2)
- Water [air, unspecified]: 3.37821e-5 m3; lognormal variance with pedigree 0.092025, pedigree (4,4,5,2,4)
- Zinc II [air, urban air close to ground]: 8.3631e-8 kg; lognormal variance with pedigree 1.2433, pedigree (2,2,5,5,2)
- AOX, Adsorbable Organic Halogen [water, surface water]: 7.20238e-7 kg; lognormal variance with pedigree 0.0439, pedigree (2,2,5,5,2)
- Arsenic ion [water, surface water]: 3.48214e-10 kg; lognormal variance with pedigree 0.0439, pedigree (2,2,5,5,2)
- BOD5, Biological Oxygen Demand [water, surface water]: 5.20833e-6 kg; lognormal variance with pedigree 0.3233, pedigree (2,2,5,5,2)
- COD, Chemical Oxygen Demand [water, surface water]: 5.68452e-6 kg; lognormal variance with pedigree 0.5133, pedigree (2,2,5,5,2)
- Cadmium II [water, surface water]: 8.45238e-10 kg; lognormal variance with pedigree 0.4533, pedigree (2,2,5,5,2)
- Chloride [water, surface water]: 7.1131e-5 kg; lognormal variance with pedigree 0.9233, pedigree (2,2,5,5,2)
- Chromium III [water, surface water]: 8.83929e-9 kg; lognormal variance with pedigree 0.6633, pedigree (2,2,5,5,2)
- Cobalt II [water, surface water]: 6.96429e-10 kg; lognormal variance with pedigree 0.0439, pedigree (2,2,5,5,2)
- Copper ion [water, surface water]: 7.32143e-9 kg; lognormal variance with pedigree 0.7533, pedigree (2,2,5,5,2)
- DOC, Dissolved Organic Carbon [water, surface water]: 2.67496e-7 kg; lognormal variance with pedigree 0.0439, pedigree (2,2,5,5,2)
- Fluoride [water, surface water]: 5.92262e-7 kg; lognormal variance with pedigree 0.7933, pedigree (2,2,5,5,2)
- Hydrocarbons, unspecified [water, surface water]: 1.08036e-7 kg; lognormal variance with pedigree 0.0733, pedigree (2,2,5,5,2)
- Hypochlorite [water, ocean]: 1.08929e-6 kg; lognormal variance with pedigree 0.056, pedigree (3,4,5,5,3)
- Hypochlorite [water, surface water]: 9.94048e-7 kg; lognormal variance with pedigree 0.066, pedigree (3,4,5,5,3)
- Iron ion [water, surface water]: 3.66071e-7 kg; lognormal variance with pedigree 0.2733, pedigree (2,2,5,5,2)
- Lead II [water, surface water]: 1.45238e-8 kg; lognormal variance with pedigree 0.5333, pedigree (2,2,5,5,2)
- Manganese II [water, surface water]: 1.04464e-8 kg; lognormal variance with pedigree 0.0439, pedigree (2,2,5,5,2)
- Mercury II [water, surface water]: 3.66071e-10 kg; lognormal variance with pedigree 0.5933, pedigree (2,2,5,5,2)
- Nickel II [water, surface water]: 5.17857e-8 kg; lognormal variance with pedigree 0.3733, pedigree (2,2,5,5,2)
- Nitrogen [water, surface water]: 2.37798e-5 kg; lognormal variance with pedigree 0.0633, pedigree (2,2,5,5,2)
- Oils, unspecified [water, surface water]: 1.64881e-7 kg; lognormal variance with pedigree 0.0633, pedigree (2,2,5,5,2)
- Phosphorus [water, surface water]: 5.3869e-8 kg; lognormal variance with pedigree 0.0439, pedigree (2,2,5,5,2)
- Sulfate [water, surface water]: 0.000580357 kg; lognormal variance with pedigree 0.0533, pedigree (2,2,5,5,2)
- Sulfide [water, surface water]: 1.56548e-7 kg; lognormal variance with pedigree 0.3033, pedigree (2,2,5,5,2)
- Sulfite [water, surface water]: 5.2381e-6 kg; lognormal variance with pedigree 0.0633, pedigree (2,2,5,5,2)
- Suspended solids, unspecified [water, surface water]: 7.20238e-6 kg; lognormal variance with pedigree 0.0833, pedigree (2,2,5,5,2)
- TOC, Total Organic Carbon [water, surface water]: 2.97619e-6 kg; lognormal variance with pedigree 0.0439, pedigree (2,2,5,5,2)
- Thallium I [water, surface water]: 1.07738e-8 kg; lognormal variance with pedigree 0.0439, pedigree (2,2,5,5,2)
- Tin ion [water, surface water]: 3.48214e-10 kg; lognormal variance with pedigree 0.0439, pedigree (2,2,5,5,2)
- Vanadium V [water, surface water]: 1.06548e-7 kg; lognormal variance with pedigree 0.7033, pedigree (2,2,5,5,2)
- Water [water, unspecified]: 0.00183279 m3; lognormal variance with pedigree 0.092025, pedigree (4,4,5,2,4)
- Zinc II [water, surface water]: 1.83929e-8 kg; lognormal variance with pedigree 0.2933, pedigree (2,2,5,5,2)

## Sampling procedure
Literature, environmental reports and questionnaires

## Extrapolations
The exchanges in this datasets are a weighted average of the following country oil datasets in the ecoinvent database (weighting with electricity production volumes in 2012):
AT, BE, BR, GR, CN, CS, CZ, DE, DK, ES, FI, FR, GB, GR, HR, HU, IE, IT, JP, MK, NL, NO, PT, PL, SE, SI, SK Data are originally from sources from the 90ies. Uncertainty has been adjusted accordingly.

## Review by Carl Vadenbo 2015-07-24
The update of the whole electricity sector for the ecoinvent v3.2 database consist of hundreds of datasets. All these datasets have passed through a streamlined review processes where the underlying modelling of production volumes, technology shares and efficiencies was reviewed in detail prior to the datasets being submitted to the database.
