# fishmeal and fish oil production, 63-65% protein, from fresh anchovy and fish residues

Dataset: EcoSpold 2, unit process
Geography: RoW
Time period: 2010-01-01 to 2022-12-31
Technology level: current
Classification: ISIC rev.4 ecoinvent: 1020:Processing and preserving of fish, crustaceans and molluscs
Scenario: Business-as-Usual
System model: Substitution, consequential, long-term
Generated by: [System]
Published in: Avadí, A. 2018
Database: ecoinvent
isCopyrightProtected: true
accessRestrictedTo: 1

## General comment
The activity represents the co-production of fishmeal and fish oil in a reduction plant. The life cycle inventories were produced based on a representative sample of 2 Peruvian plants and their activity.~200 fishmeal plants existed in Peru as of 2016. This activity can be used to modelfishmeal production in other geographies, after substituting the fish provision exchanges.
System boundaries of FMFO production and relations between activities

## Included activities start
From delivery of raw material to the plant, through its Use phase (production), including all upstream activities (e.g. provision of fuels, electricity and chemicals)

## Geography
Representative of Peru and Chile.

## Technology
Production of Fair Average Quality (FAQ) fishmeal (63-65% protein) by indirect drying, residual heavy fuel (R500) powered. Data from one plant representing 8% of the total amount of anchovy processed into FAQ fishmeal (48 430 t/y out of 5.2 million t/y * 12%, in 2008-2010). The technology is common in the country for FAQ fishmeal production.
After arrival of the fishing vessel at the floating terminal, the fish is pumped out of the vessel’s hold and conveyed to the plant mixed with seawater in a proportion close to 1 m3 per t of fish. There the fish is separated from the mix of water, fish residues and blood (bloodwater) through a screw drainer. The drained bloodwater is processed in a rotating screen in order to remove the solid residues (flesh, scale, etc.) that are then conveyed to the “solid line” (described below), and the remaining water is processed first in an oil and solids separator and then in a flotation tank where oil is recuperated thanks to its positive buoyancy. The oil is conveyed to the “liquid line” (described below) whereas the remaining water is discharged at sea through a long underwater pipe (e.g. one-km long). In modern plants, the flotation process is accelerated by the release of fine air bubbles at the bottom of the flotation tank. The remaining bulk of the fish is then conveyed by a wire mesh conveyor belt to an automated weighting hopper and then released into large storage pits. From there fish is conveyed to a cooker using a conveyor, whereas additional bloodwater is processed into a specific trommel. There, a continuous cooking occurs by means of an internal rotary screw conveyor, at a temperature of 95 to 100°C in order to coagulate the proteins. The cooking process is indirect, thanks to steam-heated jacket surrounding the conveyor, but still generates odorous fumes. From the cooker the product is conveyed to strainer (or first to a pre-strainer and then to double helicoid press) that allows draining a mix of oil, protein (dissolved and suspended) and water from the solid mass, thanks to the previous cooking step. From the straining process starts the major separation between the liquid line (oily water or “press liquor") and the solid line (presscake), but with further bridging connections.
The processes in the liquid line consists in a further separation between oil, water and protein coming from different paths. The press liquor, along with the bloodwater, is first transferred by pipe to an oil and liquid separator (or decanter) which is a horizontal centrifuge. After two to three separation phases, the oil and liquid separator returns the remaining solid (sludge) to the solid line whereas the liquid goes to a vertical disk centrifuge. The centrifugation process allows further separation between fish oil and the aqueous phase named “stickwater”. Stickwater is concentrated in a multi-stage (two to four) evaporation unit, prior to enzyme addition aimed at reducing its viscosity. The unit must be cleaned at regular interval, usually using caustic soda, to maintain its thermal efficiency. This is because the evaporator tubes where steam circulates are quickly fouled. The final phase of the liquid line is oil polishing, which is carried out in special separators and facilitated by using hot water, which extracts impurities from the oil (resulting in additional stickwater) and thus ensures stability during storage. This phase ends with the transfer of the stickwater to the evaporation unit and with the pumping of the refined oil into storage.
The presscake along with the sludge from the oil and liquid separator is conveyed first to a wet mill and then to a rotating dryer. As indicated earlier, direct-fire dryers or indirect steam dryers can be used and will result in different qualities of fishmeal. The drying process also generates smells and particles, especially in the case of direct-fire dryers. The raw dry meal (“scrap”) first passes through a sieve to remove large extraneous material mostly collected during the purse-seining operation (wood, rope, plastic residues, etc.). Then the meal is pneumatically conveyed to a cyclonic tower to extract fish meal particles from the drying air. In the sampled plant of FAQ fishmeal, the air emission of the cyclone was processed in a scrubbing tower where water is pulverised in order to limit particles and odours emissions. The fishmeal is then milled in a dry mill. Follows a centrifuging purifier that allows a final elimination of small extraneous material. Finally anti-oxidant is added before automatic weighting and conditioning into plastic bags for distribution.
Steam is produced in a series of boilers and distributed throughout the plant by insulated pipes, forming close circuits in order to save energy. Steam condensate is also returned to the boiler through a piping systems.
The energy source in boilers is either natural gas when available or heavy fuel. In the past fish oil was recycled in boiler burners because its commercial value was very low.
Electricity from the Peruvian grid is used most of the time, except during peak hours (or power breakdowns) where it is supplied by a series of powerful electric generators fuelled by light fuel. This strategy is used to reduce production costs because self-generated energy is cheaper than the grid energy during peak hours.
Process diagram of FMFO production

## Time period
Production figures represent the period 2005-2015, relative production of the three fishmeal types represent the period 2012-2014 (chosen due to an ongoing trend in shifting production from FAQ to Prime), and fishmeal and fish oil yields represent the period 2001-2011. Valid as of 2017.

## Parameters
- antioxidant use: 0.25 kg; name antioxidant_use; triangular min 0.226974, mostLikely 0.246711, max 0.276316, pedigree (1,4,1,1,1)
  Antioxidant use per t of processed raw material
- biological oxygen demand 5 emissions: 17.8 kg; name bod5_emissions; triangular min 16.02, mostLikely 17.8, max 19.58, pedigree (1,4,1,1,1)
  BOD5 emitted to ocean per t of processed raw material
- electricity use: 13.8 kWh; name electricity_use; triangular min 12.4, mostLikely 13.8, max 15.2, pedigree (1,4,1,1,1)
  Electricity use per t of processed raw material
- fishmeal bags use: 0.592 kg; name fm_bag_use; triangular min 0.533, mostLikely 0.592, max 0.651, pedigree (1,4,1,1,1)
  Fishmeal bags use per t of processed raw material
- fuel use: 1913 MJ; name fuel_use; triangular min 1722, mostLikely 1913, max 2104, pedigree (1,4,1,1,1)
  Fuel use per t of processed raw material
- oil and fat emissions: 3.94 kg; name oil_emissions; triangular min 3.55, mostLikely 3.94, max 4.33, pedigree (1,4,1,1,1)
  Oils and fats from raw material emitted to ocean per t of processed raw material
- raw material to fishmeal ratio: 4.9453 kg/kg; name fish_to_fm; triangular min 3.29817, mostLikely 5.27342, max 6.26431, pedigree (1,1,1,1,1)
  Amount of raw material needed to produce 1000 kg of fishmeal, considering a 43% inclusion of fish residues
- suspended solids emissions: 6.92 kg; name suspended_solids_emissions; triangular min 6.23, mostLikely 6.92, max 7.61, pedigree (1,4,1,1,1)
  Suspended solids from raw material emitted to ocean per t of processed raw material

## Reference product
- fish residues: 1 kg; By-product classification Recyclable; CPC 21221: Fish fillets and fish meat (whether or not minced), fresh or chilled
  production volume 1 kg
  properties: ash content 0.015 kg, carbon allocation 0.269403 kg, carbon content 0.47385, carbon content, non-fossil 0.47385, dry mass 0.56854 kg, energy content 4.01 MJ, fat content 0.061, price 0 EUR2005, protein content 0.18, water content 0.75889, water in wet mass 0.43146 kg, wet mass 1 kg

## Inputs from technosphere
- cyclohexane: -0.000394362 kg
  properties: carbon content, fossil 0.857143, dry mass 1 kg, heating value, net 43.22 MJ, wet mass 1 kg
- electricity, medium voltage: -2.40279e-5, -2.82102e-5, -0.000411139, -3.56849e-6, -5.64789e-5, -6.39137e-7, -1.58048e-5, -0.000345631, -6.9835e-5, -1.77263e-5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 kWh (30 suppliers, which the file names only by identifier); sum of these -0.0217688 kWh
- extrusion, plastic film: -0.000933849 kg
- fish oil, from anchovy: 0.0669856 kg; triangular min 0.0414673, mostLikely 0.0669856, max 0.092504, pedigree (1,1,1,5,1)
  properties: ash content 0.1 kg, carbon content, non-fossil 0.7263, dry mass 1 kg, energy content 38.6 MJ, fat content 0.99, price 2.78243 EUR2005, wet mass 1 kg
- fishmeal plant: -0.00157745 unit
  properties: capacity [kg] 1000 kg, lifetime 30 year
- fishmeal, 63-65% protein: 0.318979 kg
  properties: ash content 0.1494 kg, carbon content, fossil 0.00106102, carbon content, non-fossil 0.463843, dry mass 0.916 kg, energy content 17.9 MJ, fat content 0.0819, price 1.27239 EUR2005, protein content 0.65, water content 0.084, wet mass 0.992944 kg
- heat, district or industrial, other than natural gas: -3.01766 MJ
  properties: corresponding fuel use, propane, furnace >100kW 1.05263 MJ, heating value, net 1 MJ
- landed anchovy, fresh: -0.577448 kg
  properties: ash content 0.02 kg, carbon content, non-fossil 0.481541, dry mass 0.26202 kg, energy content 7.9 MJ, fat content 0.088, protein content 0.191, water content 2.81651, wet mass 1 kg
- polypropylene, granulate: -0.000933849 kg
  properties: carbon content, fossil 0.857143, dry mass 1 kg, heating value, net 32.78 MJ, wet mass 1 kg
- waste plastic, mixture: 0.000103843, 0.000726957, 2.72134e-6, 2.8658e-6, 5.24738e-7, 8.99988e-5, 6.93838e-6 kg (7 suppliers, which the file names only by identifier); sum of these 0.000933849 kg
  properties: carbon content, fossil 0.857143, dry mass 0.847 kg, heating value, net 30.79 MJ, water content 0.180638, wet mass 1 kg
- weaving, synthetic fibre: -0.000933849 kg
  properties: dry mass 1 kg, wet mass 1 kg

## Emissions to nature
- Water [air, low population density, long-term]: -0.00116049 m3
- BOD5, Biological Oxygen Demand [water, ocean]: -0.0280786 kg
- COD, Chemical Oxygen Demand [water, ocean]: -0.0154432 kg
- DOC, Dissolved Organic Carbon [water, ocean]: -0.0449257 kg
- Oils, non-fossil [water, ocean]: -0.00621515 kg
- Suspended solids, unspecified [water, ocean]: -0.0109159 kg
- TOC, Total Organic Carbon [water, ocean]: -0.0449257 kg

## Sampling procedure
Data from 2 fishmeal plants, opperated by the largest and one of the other main fish processing companies in the country. These plants are representative of the current technology and management, as determined by interviews with many technical, commercial, academic and governmental representatives.
In Peru, as of 2016 there are 207 fishmeal plants, out of which 37 have cancelled permits.
