# mine construction, vermiculite

Dataset: EcoSpold 2, unit process
Geography: RoW
Time period: 2000-01-01 to 2022-12-31
Technology level: current
Classification: EcoSpold01Categories: construction materials/additives
Classification: ISIC rev.4 ecoinvent: 4290:Construction of other civil engineering projects
Tags: ConvertedDataset
Scenario: Business-as-Usual
System model: Substitution, consequential, long-term
Generated by: Daniel Kellenberger (obsolete)
Published in: Kellenberger D. 2004
Database: ecoinvent
isCopyrightProtected: true
accessRestrictedTo: 1

## General comment
The mine studied is the Palabora mine in South Africa
[This dataset was already contained in the ecoinvent database version 2. It was not individually updated during the transfer to ecoinvent version 3. Life Cycle Impact Assessment results may still have changed, as they are affected by changes in the supply chain, i.e. in other datasets. This dataset was generated following the ecoinvent quality guidelines for version 2. It may have been subject to central changes described in the ecoinvent version 3 change report (http://www.ecoinvent.org/database/ecoinvent-version-3/reports-of-changes/), and the results of the central updates were reviewed extensively. The changes added e.g. consistent water flows and other information throughout the database. The documentation of this dataset can be found in the ecoinvent reports of version 2, which are still available via the ecoinvent website. The change report linked above covers all central changes that were made during the conversion process.]

## Included activities end
includes land-use (occupation, transformation) for infrastructure, buildings, roads and green areas. The quarried area is not included here, but in the module describing mining activities

## Geography
data are only from one company in South-Africa (Palabora Mining Company ltd.);

## Technology
infrastructure from one of the biggest mines in the world, which is in South-Africa, has been used.

## Reference product
- mine infrastructure, vermiculite: 1 unit; By-product classification allocatable product; CPC 53261: Mining constructions
  production volume 3.97838 unit
  properties: carbon allocation 0 kg, carbon content 0, price 176870 EUR2005

## Inputs from technosphere
- building, hall: 500 m2; lognormal variance with pedigree 0.134, pedigree (1,4,5,5,1)
- building, multi-storey: 480 m3; lognormal variance with pedigree 0.134, pedigree (1,4,5,5,1)
- industrial machine, heavy, unspecified: 66940.8, 33059.2 kg (2 suppliers, which the file names only by identifier); sum of these 100000 kg; lognormal variance with pedigree 0.134, pedigree (1,4,5,5,1)

## Inputs from nature
- Occupation, industrial area [natural resource, land]: 5.6672e8 m2*year; lognormal variance with pedigree 0.134, pedigree (1,4,5,5,1)
- Occupation, traffic area, rail network [natural resource, land]: 9.68e6 m2*year; lognormal variance with pedigree 0.134, pedigree (1,4,5,5,1)
- Occupation, traffic area, road network [natural resource, land]: 5.2e6 m2*year; lognormal variance with pedigree 0.134, pedigree (1,4,5,5,1)
- Transformation, from unspecified [natural resource, land]: 5.72e6 m2; lognormal variance with pedigree 0.054, pedigree (1,4,5,5,1)
- Transformation, to industrial area [natural resource, land]: 5.6672e6 m2; lognormal variance with pedigree 0.054, pedigree (1,4,5,5,1)
- Transformation, to traffic area, rail network [natural resource, land]: 48400 m2; lognormal variance with pedigree 0.134, pedigree (1,4,5,5,1)
- Transformation, to traffic area, road network [natural resource, land]: 52000 m2; lognormal variance with pedigree 0.054, pedigree (1,4,5,5,1)

## Sampling procedure
Data from questionnaire from one company called Parabora mining company ltd. in South-Africa.

## Extrapolations
data which are only available for CH, RER have been used as proxy for D This dataset has been copied from an original dataset covering the geography ZA. The uncertainty has been adjusted accordingly.

## Review by Roberto Dones 2007-08-16
passed
