# alkyd paint production, white, solvent-based, product in 60% solution state

Dataset: EcoSpold 2, unit process
Geography: RoW
Time period: 1995-01-01 to 2022-12-31
Technology level: current
Classification: ISIC rev.4 ecoinvent: 2022:Manufacture of paints, varnishes and similar coatings, printing ink and mas
Synonyms: oil based paint
Scenario: Business-as-Usual
System model: Substitution, consequential, long-term
Generated by: Hans-Jörg Althaus
Published in: Althaus H.-J. 2007
Database: ecoinvent
isCopyrightProtected: true
accessRestrictedTo: 1

## General comment
This dataset represents the production of 1 kg of a 'typical' solvent-borne white alkyd paint. Alkyd paints can be made from many different resins. This dataset stands for one specific long oil alkyd as used in architectural paints of white colour and should not be used for other alkyds if it's contribution to the overall result is important. The data quality is not sufficient to allow for e.g. a comparative assessment of different paints.
References:
Gendorf (2016) Umwelterklärung 2015, Werk Gendorf Industriepark, www.gendorf.de.
Althaus H.-J., Chudacoff M., Hischier R., Jungbluth N., Osses M. and Primas A. (2007) Life Cycle Inventories of Chemicals. ecoinvent report No. 8, v2.0. EMPA Dübendorf, Swiss Centre for Life Cycle Inventories, Dübendorf, CH.

## Included activities start
From reception of raw materials at the factory gate.

## Included activities end
This activity ends with the production of 1 kg of solvent-borne alkyd paint. The dataset doesn't include packaging.

## Geography
The data in this dataset are not geography-specific. Some values are based on data from a large chemical factory located in Germany. These are assumed to be valid for this geography.

## Technology
The paint is produced by physically mixing the alkyd resin with the pigments, auxiliary products and the solvent (white spirit). White paint usually uses TiO2, which probably is one of the more environmentally friendly pigments.
Reference:
Althaus H.-J., Chudacoff M., Hischier R., Jungbluth N., Osses M. and Primas A. (2007) Life Cycle Inventories of Chemicals. ecoinvent report No. 8, v2.0. EMPA Dübendorf, Swiss Centre for Life Cycle Inventories, Dübendorf, CH.

## Time period
The data in this dataset come from different years, but overall form the most realistic picture of the production. Some values are based on data published by the Gendorf factory that were collected between 2011 and 2015. The time period has been adjusted accordingly. For more details, see the comments of the exchanges.

## Reference product
- alkyd paint, white, without solvent, in 60% solution state: 1 kg; By-product classification allocatable product; CPC 35110: Paints and varnishes and related products
  production volume 3.304 kg
  properties: carbon allocation 0.339996 kg, carbon content 0.339996, carbon content, fossil 0.140367, carbon content, non-fossil 0.199629, dry mass 1 kg, heating value, net 10.3 MJ, price 3.37 EUR2005, water content 0, water in wet mass 0 kg, wet mass 1 kg

## Inputs from technosphere
- alkyd resin, long oil, without solvent, in 70% white spirit solution state: 0.4882 kg; lognormal variance with pedigree 0.116, pedigree (4,5,5,5,3)
  properties: carbon content, fossil 0.268755, carbon content, non-fossil 0.412906, dry mass 1 kg, heating value, net 20.65 MJ, wet mass 1 kg
- chemical factory, organics: 4e-10 unit; lognormal variance with pedigree 0.3098, pedigree (2,3,2,4,3)
- chemical, organic: 0.01683 kg; lognormal variance with pedigree 0.116, pedigree (4,5,5,5,3)
  properties: carbon content, fossil 0.628, dry mass 1 kg, heating value, net 19.03 MJ, wet mass 1 kg
- electricity, medium voltage: 0.00679762, 0.000254334, 0.0032314, 0.0560849, 0.00470932, 0.000252416 kWh (6 suppliers, which the file names only by identifier); sum of these 0.07133 kWh; lognormal variance with pedigree 0.178, pedigree (5,5,5,5,3)
- nitrogen, liquid: 0.019 kg; lognormal variance with pedigree 0.0104, pedigree (2,3,2,4,3)
  properties: dry mass 1 kg, wet mass 1 kg
- titanium dioxide: 0.5051 kg; lognormal variance with pedigree 0.116, pedigree (4,5,5,5,3)
  properties: dry mass 1 kg, wet mass 1 kg
- waste paint: -0.01683 kg; lognormal variance with pedigree 0.39, pedigree (5,5,5,5,5)
  properties: carbon content, fossil 0.65, dry mass 1 kg, heating value, net 19.7 MJ, wet mass 1 kg
- white spirit: 0.01356 kg; lognormal variance with pedigree 0.116, pedigree (4,5,5,5,3)
  properties: carbon content, fossil 0.863404, dry mass 1 kg, heating value, net 45 MJ, wet mass 1 kg

## Emissions to nature
- Hydrocarbons, aliphatic, alkanes, unspecified [air, unspecified]: 0.00683 kg; lognormal variance with pedigree 0.5, pedigree (5,5,5,5,5)
- Nitrogen [air, unspecified]: 0.019 kg; lognormal variance with pedigree 0.0104, pedigree (2,3,2,4,3)

## Sampling procedure
A 'typical' solvent-borne white alkyd paint is chosen and its raw material consumption is calculated. Energy data are estimated. Some values are calculated based on data from a large chemical factory located in Germany. For more details, see the comments of the exchanges.

## Extrapolations
This dataset has been copied from an original dataset covering the geography RER. The uncertainty has been adjusted accordingly.

## Review by Emilia Moreno Ruiz 2017-08-09
This dataset was additionally reviewed in a separate review process by Eric Johnson of Atlantic Consulting as well as Emilia Moreno Ruiz and Gregor Wernet of ecoinvent.
