# treatment of residue from TiO2 production, chloride process, residual material landfill

Dataset: EcoSpold 2, unit process
Geography: RoW
Time period: 1994-01-01 to 2022-12-31
Technology level: current
Classification: ISIC rev.4 ecoinvent: 3822:Treatment and disposal of hazardous waste
Classification: EcoSpold01Categories: waste management/residual material landfill
Synonyms: inorganic residue from titanium dioxide production with the chloride process; neutralised spray vessel solids from titanium dioxide production
Tags: ConvertedDataset; Treatment
Scenario: Business-as-Usual
System model: Substitution, consequential, long-term
Generated by: Gabor Doka (obsolete)
Published in: Doka G. 2007
Database: ecoinvent
isCopyrightProtected: true
accessRestrictedTo: 1

## General comment
Inventoried waste contains 100% residue from TiO2 production (chloride process); .
waste composition (wet, in ppm): H2O 560000; O 200000; H n.a.; C 90000; S n.a.; N n.a.; P 893.79; B 7.1933; Cl n.a.; Br n.a.; F n.a.; I n.a.; Ag 0.714; As 0.62521; Ba 149.04; Cd 11.748; Co 1.3453; Cr n.a.; Cu n.a.; Hg n.a.; Mn 259.36; Mo 1.9551; Ni n.a.; Pb 502.43; Sb 22.564; Se 0.31969; Sn 73.44; V 200; Zn 770; Be n.a.; Sc n.a.; Sr n.a.; Ti 80000; Tl n.a.; W n.a.; Si 20000; Fe 25000; Ca 22000; Al n.a.; K 2059.7; Mg n.a.; Na n.a.;
Share of carbon in waste that is biogenic 0%.
[This dataset was already contained in the ecoinvent database version 2. It was not individually updated during the transfer to ecoinvent version 3. Life Cycle Impact Assessment results may still have changed, as they are affected by changes in the supply chain, i.e. in other datasets. This dataset was generated following the ecoinvent quality guidelines for version 2. It may have been subject to central changes described in the ecoinvent version 3 change report (http://www.ecoinvent.org/database/ecoinvent-version-3/reports-of-changes/), and the results of the central updates were reviewed extensively. The changes added e.g. consistent water flows and other information throughout the database. The documentation of this dataset can be found in the ecoinvent reports of version 2, which are still available via the ecoinvent website. The change report linked above covers all central changes that were made during the conversion process.]

## Included activities end
Waste-specific short-term emissions to water from leachate. Long-term emissions from landfill to ground water.

## Geography
Technology encountered in Switzerland in 2000. Landfill includes base seal and leachate collection system.

## Technology
Swiss residual material landfill for polluted, inorganic waste. With base seal and leachate collection system. Recultivation after closure.

## Time period
Waste composition as given in literature reference, theoretical data or other source. Transfer coefficients from prospective model.

## Reference product
- residue from TiO2 production, chloride process: -1 kg; By-product classification Waste; CPC 39367: Waste and scrap of tungsten, molybdenum, tantalum, magnesium, cobalt, cadmium, titanium, zirconium, beryllium […]
  production volume 3.96633 kg
  properties: carbon allocation 0.09 kg, carbon content 0.204545, carbon content, fossil 0.204545, carbon content, non-fossil 0, dry mass 0.44 kg, heating value, net 0 MJ, price 0 EUR2005, water content 1.27273, water in wet mass 0.56 kg, wet mass 1 kg

## Inputs from technosphere
- process-specific burdens, residual material landfill: 0.282874, 0.717126 kg (2 suppliers, which the file names only by identifier); sum of these 1 kg; lognormal variance with pedigree 0.002, pedigree (1,1,5,5,1)
- residual material landfill: 2.09e-9 unit; lognormal variance with pedigree 0.002, pedigree (1,1,5,5,1)

## Emissions to nature
- Antimony ion [water, ground-, long-term]: 1.46e-5 kg; lognormal variance with pedigree 1.172, pedigree (1,1,5,5,1)
- Antimony ion [water, surface water]: 7.96e-6 kg; lognormal variance with pedigree 1.192, pedigree (1,1,5,5,1)
- Arsenic ion [water, ground-, long-term]: 6.25e-16 kg; lognormal variance with pedigree 1.652, pedigree (1,1,5,5,1)
- Arsenic ion [water, surface water]: 6.25e-7 kg; lognormal variance with pedigree 1.632, pedigree (1,1,5,5,1)
- BOD5, Biological Oxygen Demand [water, ground-, long-term]: 0.0481 kg; lognormal variance with pedigree 0.182, pedigree (1,1,5,5,1)
- BOD5, Biological Oxygen Demand [water, surface water]: 8.03e-5 kg; lognormal variance with pedigree 0.772, pedigree (1,1,5,5,1)
- Barium II [water, ground-, long-term]: 1.23e-6 kg; lognormal variance with pedigree 6.652, pedigree (1,1,5,5,1)
- Barium II [water, surface water]: 2.06e-9 kg; lognormal variance with pedigree 2.132, pedigree (1,1,5,5,1)
- Boron [water, ground-, long-term]: 7.07e-6 kg; lognormal variance with pedigree 1.312, pedigree (1,1,5,5,1)
- Boron [water, surface water]: 5.64e-8 kg; lognormal variance with pedigree 1.702, pedigree (1,1,5,5,1)
- COD, Chemical Oxygen Demand [water, ground-, long-term]: 0.147 kg; lognormal variance with pedigree 0.182, pedigree (1,1,5,5,1)
- COD, Chemical Oxygen Demand [water, surface water]: 0.000245 kg; lognormal variance with pedigree 0.772, pedigree (1,1,5,5,1)
- Cadmium II [water, ground-, long-term]: 7.98e-8 kg; lognormal variance with pedigree 7.472, pedigree (1,1,5,5,1)
- Cadmium II [water, surface water]: 1.33e-10 kg; lognormal variance with pedigree 2.492, pedigree (1,1,5,5,1)
- Calcium II [water, ground-, long-term]: 0.00199 kg; lognormal variance with pedigree 1.722, pedigree (1,1,5,5,1)
- Calcium II [water, surface water]: 3.32e-6 kg; lognormal variance with pedigree 1.182, pedigree (1,1,5,5,1)
- Cobalt II [water, ground-, long-term]: 2.3e-7 kg; lognormal variance with pedigree 2.312, pedigree (1,1,5,5,1)
- Cobalt II [water, surface water]: 3.84e-10 kg; lognormal variance with pedigree 2.352, pedigree (1,1,5,5,1)
- DOC, Dissolved Organic Carbon [water, ground-, long-term]: 0.0582 kg; lognormal variance with pedigree 0.182, pedigree (1,1,5,5,1)
- DOC, Dissolved Organic Carbon [water, surface water]: 9.71e-5 kg; lognormal variance with pedigree 0.772, pedigree (1,1,5,5,1)
- Iron ion [water, ground-, long-term]: 0.000125 kg; lognormal variance with pedigree 7.272, pedigree (1,1,5,5,1)
- Iron ion [water, surface water]: 2.09e-7 kg; lognormal variance with pedigree 1.542, pedigree (1,1,5,5,1)
- Lead II [water, ground-, long-term]: 2.61e-6 kg; lognormal variance with pedigree 7.672, pedigree (1,1,5,5,1)
- Lead II [water, surface water]: 4.35e-9 kg; lognormal variance with pedigree 2.022, pedigree (1,1,5,5,1)
- Manganese II [water, ground-, long-term]: 2.14e-6 kg; lognormal variance with pedigree 6.582, pedigree (1,1,5,5,1)
- Manganese II [water, surface water]: 3.58e-9 kg; lognormal variance with pedigree 2.062, pedigree (1,1,5,5,1)
- Molybdenum VI [water, ground-, long-term]: 8.98e-9 kg; lognormal variance with pedigree 1.502, pedigree (1,1,5,5,1)
- Molybdenum VI [water, surface water]: 1.95e-6 kg; lognormal variance with pedigree 1.482, pedigree (1,1,5,5,1)
- Phosphate [water, ground-, long-term]: 0.000612 kg; lognormal variance with pedigree 1.232, pedigree (1,1,5,5,1)
- Phosphate [water, surface water]: 1.02e-6 kg; lognormal variance with pedigree 1.462, pedigree (1,1,5,5,1)
- Potassium I [water, ground-, long-term]: 0.00148 kg; lognormal variance with pedigree 0.572, pedigree (1,1,5,5,1)
- Potassium I [water, surface water]: 0.000581 kg; lognormal variance with pedigree 0.612, pedigree (1,1,5,5,1)
- Selenium IV [water, ground-, long-term]: 2.07e-7 kg; lognormal variance with pedigree 1.722, pedigree (1,1,5,5,1)
- Selenium IV [water, surface water]: 1.13e-7 kg; lognormal variance with pedigree 1.742, pedigree (1,1,5,5,1)
- Silicon [water, ground-, long-term]: 0.02 kg; lognormal variance with pedigree 0.292, pedigree (1,1,5,5,1)
- Silicon [water, surface water]: 4.5e-5 kg; lognormal variance with pedigree 0.842, pedigree (1,1,5,5,1)
- Silver I [water, ground-, long-term]: 2.75e-8 kg; lognormal variance with pedigree 4.262, pedigree (1,1,5,5,1)
- Silver I [water, surface water]: 4.59e-11 kg; lognormal variance with pedigree 2.632, pedigree (1,1,5,5,1)
- TOC, Total Organic Carbon [water, ground-, long-term]: 0.0582 kg; lognormal variance with pedigree 0.182, pedigree (1,1,5,5,1)
- TOC, Total Organic Carbon [water, surface water]: 9.71e-5 kg; lognormal variance with pedigree 0.772, pedigree (1,1,5,5,1)
- Tin ion [water, ground-, long-term]: 1.39e-6 kg; lognormal variance with pedigree 4.932, pedigree (1,1,5,5,1)
- Tin ion [water, surface water]: 2.32e-9 kg; lognormal variance with pedigree 2.112, pedigree (1,1,5,5,1)
- Titanium ion [water, ground-, long-term]: 0.0237 kg; lognormal variance with pedigree 0.512, pedigree (1,1,5,5,1)
- Titanium ion [water, surface water]: 3.96e-5 kg; lognormal variance with pedigree 0.892, pedigree (1,1,5,5,1)
- Vanadium V [water, ground-, long-term]: 0.000154 kg; lognormal variance with pedigree 0.892, pedigree (1,1,5,5,1)
- Vanadium V [water, surface water]: 4.91e-7 kg; lognormal variance with pedigree 1.402, pedigree (1,1,5,5,1)
- Zinc II [water, ground-, long-term]: 9.44e-6 kg; lognormal variance with pedigree 5.542, pedigree (1,1,5,5,1)
- Zinc II [water, surface water]: 1.58e-8 kg; lognormal variance with pedigree 1.862, pedigree (1,1,5,5,1)

## Sampling procedure
Landfill model based on observed leachate concentrations in literature. Extrapolated to 60'000 years heeding chemical characteristics. Initial waste composition from various literature sources.

## Extrapolations
This dataset has been copied from an original dataset covering the geography CH. The uncertainty has been adjusted accordingly.

## Review by Niels Jungbluth 2003-07-15
Passed. Calculation for standard deviation 95 of, i.e., infrastructure,
land occupation, transport services or other services can differ from
standard Pedigree approach used in this project and figures obtained by
this procedure.
