# explosives factory construction

Dataset: EcoSpold 2, unit process
Geography: RoW
Time period: 2000-01-01 to 2022-12-31
Technology level: current
Classification: EcoSpold01Categories: construction materials/others
Classification: ISIC rev.4 ecoinvent: 4290:Construction of other civil engineering projects
Tags: ConvertedDataset
Scenario: Business-as-Usual
System model: Substitution, consequential, long-term
Generated by: Daniel Kellenberger (obsolete)
Published in: Kellenberger D. 2004
Database: ecoinvent
isCopyrightProtected: true
accessRestrictedTo: 1

## General comment
All data are estimations based on personal communication and aerial photographs. This module should not be used if its relative importance would be high in a certain environmental inventory.
[This dataset was already contained in the ecoinvent database version 2. It was not individually updated during the transfer to ecoinvent version 3. Life Cycle Impact Assessment results may still have changed, as they are affected by changes in the supply chain, i.e. in other datasets. This dataset was generated following the ecoinvent quality guidelines for version 2. It may have been subject to central changes described in the ecoinvent version 3 change report (http://www.ecoinvent.org/database/ecoinvent-version-3/reports-of-changes/), and the results of the central updates were reviewed extensively. The changes added e.g. consistent water flows and other information throughout the database. The documentation of this dataset can be found in the ecoinvent reports of version 2, which are still available via the ecoinvent website. The change report linked above covers all central changes that were made during the conversion process.]

## Included activities end
includes the infrastructure (buildings multi-storey and halls and equipment) and the land-use (built and not built areas)

## Geography
For some exchanges RER- and DE-modules have been used as proxy

## Technology
Assumption that data valid for avarage Swiss plant

## Reference product
- explosives factory: 1 unit; By-product classification allocatable product; CPC 53269: Other constructions for manufacturing
  production volume 3.96633 unit
  properties: carbon allocation 0 kg, carbon content 0, price 1.67381e6 EUR2005

## Inputs from technosphere
- building, hall: 2000 m2; lognormal variance with pedigree 0.338, pedigree (4,5,5,5,1)
- building, multi-storey: 7200 m3; lognormal variance with pedigree 0.338, pedigree (4,5,5,5,1)
- conveyor belt: 250 m; lognormal variance with pedigree 0.338, pedigree (4,5,5,5,1)
- industrial machine, heavy, unspecified: 1e6 kg; lognormal variance with pedigree 0.338, pedigree (4,5,5,5,1)

## Inputs from nature
- Occupation, industrial area [natural resource, land]: 140000 m2*year; lognormal variance with pedigree 0.078, pedigree (4,5,5,5,1)
- Occupation, traffic area, road network [natural resource, land]: 10000 m2*year; lognormal variance with pedigree 0.078, pedigree (4,5,5,5,1)
- Transformation, from unspecified [natural resource, land]: 3000 m2; lognormal variance with pedigree 0.158, pedigree (4,5,5,5,1)
- Transformation, to industrial area [natural resource, land]: 2800 m2; lognormal variance with pedigree 0.158, pedigree (4,5,5,5,1)
- Transformation, to traffic area, road network [natural resource, land]: 200 m2; lognormal variance with pedigree 0.158, pedigree (4,5,5,5,1)

## Sampling procedure
All other In- and Output modules are estimations

## Extrapolations
See geography This dataset has been copied from an original dataset covering the geography CH. The uncertainty has been adjusted accordingly.

## Review by Roberto Dones 2004-04-14
passed
