# coffee green bean production, arabica, irrigated

Dataset: EcoSpold 2, unit process
Geography: BR-MG
Time period: 2020-01-01 to 2022-12-31
Technology level: current
Classification: ISIC rev.4 ecoinvent: 0127:Growing of beverage crops
Synonyms: coffee cultivation, coffee beans production, green coffee beans production
Tags: No
Scenario: Business-as-Usual
System model: Substitution, consequential, long-term
Generated by: Anna Leticia M. T. Pighinelli
Published in: Folegatti Matsuura, M. 2017
Database: ecoinvent
isCopyrightProtected: true
accessRestrictedTo: 1

## General comment
The raw data collected in interviews were organized in electronic spreadsheets and checked for completeness and consistency. Agricultural inputs were detailed as to their composition and physical characteristics. Agricultural operations were characterized in terms type of fuel and specific consumption. Irrigation is used to supply water to the crop, in the amount of 1433 m3/ha. Emissions from the agricultural process were estimated using the BRCalc/ICVCalc tool, developed by Embrapa Environment, which includes specific climate and soil databases for the 137 Brazilian agricultural mesoregions, in addition to databases of parameters related to agricultural crops, fertilisers and pesticides.
The main emission models adopted by BRCalc/ICVCalc (Folegatti-Matsuura et al., 2022) derive from the references: Nemecek et al. (2015), IPCC (2019), Nemecek & Kagi (2007), Folegatti-Matsuura & Picoli (2018). It was used the model BRLUC (Donke et al., 2020) to estimate the LUC emissions.

## Included activities start
This activity starts with reforming and cleaning of the area after the harvest of the previous crop

## Included activities end
The dataset includes the inputs of correctives, mineral fertilisers and pesticides and organic fertiliser. The dataset includes the agricultural operations and the amount of fuel consumed during operations and emissions related. The dataset also includes direct field emissions and land use change emissions, with important regionalizations added. The dataset doesn't include: seedlings production, drying, cleaning and storage of harvested grains. The activity ends after harvest at the farm gate.

## Allocation
Coffee is a perennial crop and is cultivated in dedicated areas, not requiring any allocation actions.

## Geography
The inventory is modelled for Brazil, Minas Gerais

## Technology
This dataset represents the production of 1 kg of green coffee beans (Arabic) in the Cerrado region in the state of Minas Gerais, which is composed of the coffee production region of Triangulo Mineiro e Alto Paranaíba. Planting, cultivation and harvest are mechanized activities. This system is irrigated. The period of 20 years was adopted as the average life span of a coffee plantation, from the cleaning of the land to the last year of the coffee plantation in production, before a new cleaning. In this study, it was assumed that the phases of implantation and formation of the coffee plantation last one year and two years, respectively. For the formation phase, the data collected correspond to the average of two years. The full production phase lasts 18 years. Grain production data were “annualized” (ie calculated for the reference of 1 hectare of coffee per year). Therefore, the input flows (natural resources, agricultural inputs and energy) and outflows (emissions to air, water and soil) of the initial phases were divided by 20. The input flows of the full production phase correspond to the average of two consecutive agricultural years, considering the behavior of the coffee plantation of alternating years of higher and lower production in succession. Mineral fertiliser input is 360 kg ammonium nitrate/ha, 84 kg monoammonium phosphate/ha, 331 kg potassium chloride/ha, 77 kg N (inorganic nitrogen fertiliser)/ha and 649 kg P2O5 (inorganic phosphorus fertiliser)/ha. Total active ingredients (a.i.) applied as pesticides amount to 6.9 kg a.i./ha. The cattle manure input is 700 kg/ha. The average productivity is 3540 kg/ha, at 10% moisture.
The amount of packing for fertilisers was calculated by adding the NPK inputs (elements and not commercial fertiliser) multiplying this total by two.
Agricultural operation was modelled based on the total diesel consumed to perform the operation and the emissions to air related to diesel burning.

## Time period
Time period of the most of the data collected for this dataset.

## Reference product
- coffee, green bean: 1 kg; By-product classification allocatable product; CPC 01610: Coffee, green
  production volume 3.64986e8 kg
  properties: carbon allocation 0.444722 kg, carbon content 0.490083, carbon content, fossil 0, carbon content, non-fossil 0.490083, dry mass 0.907441 kg, price 1.6 EUR2005, water content 0.102, water in wet mass 0.092559 kg, wet mass 1 kg

## Inputs from technosphere
- ammonium nitrate: 0.301 kg; lognormal variance with pedigree 1.0707, pedigree (2,2,1,1,1)
  properties: dry mass 1 kg, wet mass 1 kg
- ammonium sulfate: 0.00161 kg; lognormal variance with pedigree 1.0707, pedigree (2,2,1,1,1)
  properties: dry mass 1 kg, wet mass 1 kg
- application of plant protection product, by field sprayer: 0.00089 ha; lognormal variance with pedigree 1.0707, pedigree (2,2,1,1,1)
- combine harvesting: 0.000282 ha; lognormal variance with pedigree 1.0707, pedigree (2,2,1,1,1)
- copper oxide: 3.51e-5 kg; lognormal variance with pedigree 1.0707, pedigree (2,2,1,1,1)
  properties: dry mass 1 kg, wet mass 1 kg
- diesel, low-sulfur: 0.00306 kg; lognormal variance with pedigree 1.2401, pedigree (3,2,1,1,3)
  properties: carbon content, fossil 0.865, dry mass 1 kg, heating value, net 42.8 MJ, wet mass 1 kg
- dolomite: 0.254 kg; lognormal variance with pedigree 1.0707, pedigree (2,2,1,1,1)
  properties: carbon content, fossil 0.130435, dry mass 1 kg, wet mass 1 kg
- electricity, low voltage: 0.23 kWh; lognormal variance with pedigree 1.0707, pedigree (2,2,1,1,1)
- fatty acid methyl ester: 0.000433 kg; lognormal variance with pedigree 1.2401, pedigree (3,2,1,1,3)
  properties: carbon content, fossil 0.041, carbon content, non-fossil 0.732, dry mass 1 kg, heating value, net 37.2 MJ, wet mass 1 kg
- fertilising, by broadcaster: 0.000904 ha; lognormal variance with pedigree 1.0707, pedigree (2,2,1,1,1)
- fruit tree seedling, for planting: 0.0538 unit; lognormal variance with pedigree 1.1, pedigree (1,1,1,1,1)
  properties: carbon content, non-fossil 1, dry mass 0.03 kg, wet mass 0.03 kg
- glyphosate: 0.000433 kg; lognormal variance with pedigree 1.0707, pedigree (2,2,1,1,1)
  properties: carbon content, fossil 0.214286, dry mass 1 kg, wet mass 1 kg
- gypsum, mineral: 0.141 kg; lognormal variance with pedigree 1.0707, pedigree (2,2,1,1,1)
  properties: dry mass 1 kg, wet mass 1 kg
- inorganic phosphorus fertiliser, as P2O5: 0.036 kg; lognormal variance with pedigree 1.0707, pedigree (2,2,1,1,1)
  properties: dry mass 1 kg, wet mass 1 kg
- land use change, perennial crop: 1.43e-5 ha; lognormal variance with pedigree 1.2286, pedigree (2,1,1,2,3)
- limestone and gypsum application, by spreader: 0.000579 ha; lognormal variance with pedigree 1.0707, pedigree (2,2,1,1,1)
- mancozeb: 9.32e-5 kg; lognormal variance with pedigree 1.0707, pedigree (2,2,1,1,1)
  properties: carbon content, fossil 0.17759, dry mass 1 kg, wet mass 1 kg
- manure, solid, cattle: 0.198 kg; lognormal variance with pedigree 1.0707, pedigree (2,2,1,1,1)
  properties: carbon content, non-fossil 0.441, dry mass 0.22 kg, water content 3.5454, wet mass 1 kg
- monoammonium phosphate: 0.000424 kg; lognormal variance with pedigree 1.0707, pedigree (2,2,1,1,1)
  properties: dry mass 1 kg, nitrogen content 0.084, phosphorus content 0.226939, wet mass 1 kg
- packaging, for fertilisers: 0.434 kg; lognormal variance with pedigree 1.6406, pedigree (4,3,1,5,4)
  properties: carbon content, fossil 0.825301, dry mass 1 kg, price 0.0642 EUR2005, wet mass 1 kg
- packaging, for pesticides: 0.00272 kg; lognormal variance with pedigree 1.6406, pedigree (4,3,1,5,4)
  properties: carbon content, fossil 0.85714, dry mass 1 kg, price 0.0642 EUR2005, wet mass 1 kg
- pesticide, unspecified: 0.000832 kg; lognormal variance with pedigree 1.0707, pedigree (2,2,1,1,1)
  properties: carbon content, fossil 0.486978, dry mass 1 kg, wet mass 1 kg
- planting with starter fertiliser, by no till planter: 1.41e-5 ha; lognormal variance with pedigree 1.0707, pedigree (2,2,1,1,1)
- potassium chloride: 0.15 kg; lognormal variance with pedigree 1.0707, pedigree (2,2,1,1,1)
  properties: dry mass 1 kg, wet mass 1 kg
- tillage, subsoiling, by subsoiler plow: 1.41e-5 ha; lognormal variance with pedigree 1.0707, pedigree (2,2,1,1,1)
- zinc monosulfate: 2.09e-5 kg; lognormal variance with pedigree 1.0707, pedigree (2,2,1,1,1)
  properties: dry mass 1 kg, wet mass 1 kg

## Inputs from nature
- Carbon dioxide, in air [natural resource, in air]: 1.65 kg; lognormal variance with pedigree 1.0707, pedigree (2,2,1,1,1)
- Occupation, arable land, unspecified use [natural resource, land]: 2.82 m2*year; lognormal variance with pedigree 1.102, pedigree (3,1,1,1,1)
- Transformation, from permanent crop, irrigated, intensive [natural resource, land]: 0.141 m2; lognormal variance with pedigree 1.0606, pedigree (2,1,1,1,1)
- Transformation, to permanent crop, irrigated, intensive [natural resource, land]: 0.141 m2; lognormal variance with pedigree 1.0606, pedigree (2,1,1,1,1)
- Ulexite [natural resource, in ground]: 1.41e-5 kg; lognormal variance with pedigree 1.0707, pedigree (2,2,1,1,1)
- Water, river [natural resource, in water]: 0.000405 m3; lognormal variance with pedigree 1.0606, pedigree (2,1,1,1,1)

## Emissions to nature
- Ammonia [air, non-urban air or from high stacks]: 0.00198006 kg; lognormal variance with pedigree 1.1101, pedigree (3,2,1,2,3)
- Benzene [air, non-urban air or from high stacks]: 2.24e-8 kg; lognormal variance with pedigree 1.2401, pedigree (3,2,1,1,3)
- Benzo(a)pyrene [air, non-urban air or from high stacks]: 9.19e-11 kg; lognormal variance with pedigree 1.1201, pedigree (3,2,1,1,3)
- Cadmium II [air, non-urban air or from high stacks]: 3.06e-11 kg; lognormal variance with pedigree 1.1201, pedigree (3,2,1,1,3)
- Carbon dioxide, fossil [air, non-urban air or from high stacks]: 0.13056 kg; lognormal variance with pedigree 1.1187, pedigree (4,3,1,3,1)
- Carbon dioxide, non-fossil [air, non-urban air or from high stacks]: 0.00119 kg; lognormal variance with pedigree 1.1087, pedigree (4,3,1,3,1)
- Carbon monoxide, fossil [air, non-urban air or from high stacks]: 0.0475164 kg; lognormal variance with pedigree 1.1087, pedigree (4,3,1,3,1)
- Chromium III [air, non-urban air or from high stacks]: 1.53e-10 kg; lognormal variance with pedigree 1.2401, pedigree (3,2,1,1,3)
- Copper ion [air, non-urban air or from high stacks]: 5.21e-9 kg; lognormal variance with pedigree 1.2401, pedigree (3,2,1,1,3)
- Dinitrogen monoxide [air, non-urban air or from high stacks]: 0.00304438 kg; lognormal variance with pedigree 1.3367, pedigree (4,3,1,3,3)
- Hydrocarbons, unspecified [air, non-urban air or from high stacks]: 9.19e-6 kg; lognormal variance with pedigree 1.1101, pedigree (3,2,1,1,3)
- Methane, fossil [air, non-urban air or from high stacks]: 3.95e-7 kg; lognormal variance with pedigree 1.3367, pedigree (4,3,1,3,3)
- Methane, non-fossil [air, non-urban air or from high stacks]: 0.00168016 kg; lognormal variance with pedigree 1.3367, pedigree (4,3,1,3,3)
- Nickel II [air, non-urban air or from high stacks]: 2.14e-10 kg; lognormal variance with pedigree 1.2401, pedigree (3,2,1,1,3)
- Nitrogen oxides [air, non-urban air or from high stacks]: 0.004078 kg; lognormal variance with pedigree 1.3367, pedigree (4,3,1,3,3)
- PAH, polycyclic aromatic hydrocarbons [air, non-urban air or from high stacks]: 1.01e-8 kg; lognormal variance with pedigree 1.1201, pedigree (3,2,1,1,3)
- Particulate Matter, < 2.5 um [air, non-urban air or from high stacks]: 1.71e-7 kg; lognormal variance with pedigree 1.1201, pedigree (3,2,1,1,3)
- Selenium IV [air, non-urban air or from high stacks]: 3.06e-11 kg; lognormal variance with pedigree 1.2401, pedigree (3,2,1,1,3)
- Sulfur dioxide [air, non-urban air or from high stacks]: 3.09e-6 kg; lognormal variance with pedigree 1.3301, pedigree (3,2,1,1,3)
- Water [air, unspecified]: 0.0003 m3; lognormal variance with pedigree 0.0032, pedigree (2,1,1,5,1)
- Zinc II [air, non-urban air or from high stacks]: 3.06e-9 kg; lognormal variance with pedigree 1.1201, pedigree (3,2,1,1,3)
- Abamectin [soil, agricultural]: 3.05e-6 kg; lognormal variance with pedigree 1.2121, pedigree (3,2,1,2,1)
- Arsenic ion [soil, agricultural]: 2.27472e-6 kg; normal variance with pedigree 1.42, pedigree (5,5,5,5,5)
- Azoxystrobin [soil, agricultural]: 6.72e-5 kg; lognormal variance with pedigree 1.2321, pedigree (3,2,1,2,1)
- Cadmium II [soil, agricultural]: 1.04151e-7 kg; normal variance with pedigree 1.42, pedigree (5,5,5,5,5)
- Chlorantraniliprole [soil, agricultural]: 1.02e-6 kg; lognormal variance with pedigree 1.2121, pedigree (3,2,1,2,1)
- Chromium III [soil, agricultural]: 5.25232e-6 kg; normal variance with pedigree 1.42, pedigree (5,5,5,5,5)
- Copper ion [soil, agricultural]: -5.29674e-6 kg; normal variance with pedigree 1.42, pedigree (5,5,5,5,5)
- Copper oxide [soil, agricultural]: 0.000316 kg; lognormal variance with pedigree 1.1121, pedigree (3,2,1,2,1)
- Copper oxychloride [soil, agricultural]: 6.36e-5 kg; lognormal variance with pedigree 1.1121, pedigree (3,2,1,2,1)
- Cyhalothrin, gamma- [soil, agricultural]: 2.33e-6 kg; lognormal variance with pedigree 1.2121, pedigree (3,2,1,2,1)
- Cypermethrin [soil, agricultural]: 7.06e-6 kg; lognormal variance with pedigree 1.2121, pedigree (3,2,1,2,1)
- Cyproconazole [soil, agricultural]: 0.000102 kg; lognormal variance with pedigree 1.2321, pedigree (3,2,1,2,1)
- Difenoconazole [soil, agricultural]: 1.55e-5 kg; lognormal variance with pedigree 1.2321, pedigree (3,2,1,2,1)
- Glyphosate [soil, agricultural]: 0.000433 kg; lognormal variance with pedigree 1.2321, pedigree (3,2,1,2,1)
- Lead II [soil, agricultural]: 3.2947e-6 kg; normal variance with pedigree 1.42, pedigree (5,5,5,5,5)
- Mancozeb [soil, agricultural]: 9.32e-5 kg; lognormal variance with pedigree 1.2321, pedigree (3,2,1,2,1)
- Mercury II [soil, agricultural]: 7.91e-8 kg; lognormal variance with pedigree 1.1181, pedigree (4,2,1,1,1)
- Novaluron [soil, agricultural]: 7.77e-6 kg; lognormal variance with pedigree 1.2121, pedigree (3,2,1,2,1)
- Oxyfluorfen [soil, agricultural]: 2.03e-5 kg; lognormal variance with pedigree 1.2321, pedigree (3,2,1,2,1)
- Pesticides, unspecified [soil, agricultural]: 2.91e-5 kg; lognormal variance with pedigree 1.2321, pedigree (3,2,1,2,1)
- Propargite [soil, agricultural]: 6.1e-6 kg; lognormal variance with pedigree 1.2121, pedigree (3,2,1,2,1)
- Saflufenacil [soil, agricultural]: 1.65e-5 kg; lognormal variance with pedigree 1.2321, pedigree (3,2,1,2,1)
- Teflubenzuron [soil, agricultural]: 6.36e-6 kg; lognormal variance with pedigree 1.2121, pedigree (3,2,1,2,1)
- Thiamethoxam [soil, agricultural]: 0.000168 kg; lognormal variance with pedigree 1.1121, pedigree (3,2,1,2,1)
- Arsenic ion [water, surface water]: 2.27495e-10 kg; lognormal variance with pedigree 1.1121, pedigree (3,2,1,2,1)
- Cadmium II [water, surface water]: 1.30548e-11 kg; lognormal variance with pedigree 1.1121, pedigree (3,2,1,2,1)
- Chromium III [water, surface water]: 5.00164e-10 kg; lognormal variance with pedigree 1.1121, pedigree (3,2,1,2,1)
- Copper ion [water, surface water]: 5.07778e-10 kg; lognormal variance with pedigree 1.2321, pedigree (3,2,1,2,1)
- Lead II [water, surface water]: 2.62948e-10 kg; lognormal variance with pedigree 1.2321, pedigree (3,2,1,2,1)
- Nitrate [water, ground-]: 0.122 kg; lognormal variance with pedigree 1.1121, pedigree (3,2,1,2,1)
- Phosphorus [water, surface water]: 5.36e-5 kg; lognormal variance with pedigree 1.1121, pedigree (3,2,1,2,1)
- Water [water, ground-]: 2e-5 m3; lognormal variance with pedigree 0.0032, pedigree (2,1,1,5,1)
- Water [water, surface water]: 8.1e-5 m3; lognormal variance with pedigree 0.0032, pedigree (2,1,1,5,1)

## Sampling procedure
The main source of data for agricultural inputs and operations is interview with relevant coffee producers located in Minas Gerais state. Emissions from the agricultural process are estimated using BRCalc/ICVCalc (Folegatti-Matsuura et al., 2022).

## Review by Simone Fazio 2022-07-29
all the review comments have been addressed, solved or better explained
agricultural operations with minor consumption (fertilizer distribution, pesticide application, etc) should be better defined in the future updates, for the sake of precision even if the overall impact don't change significantly
