# gravel/sand quarry construction

Dataset: EcoSpold 2, unit process
Geography: CH
Time period: 1997-01-01 to 2022-12-31
Technology level: current
Classification: EcoSpold01Categories: construction materials/additives
Classification: ISIC rev.4 ecoinvent: 4290:Construction of other civil engineering projects
Synonyms: pit
Tags: ConvertedDataset
Scenario: Business-as-Usual
System model: Substitution, consequential, long-term
Share of production covered: 100 %
Generated by: Daniel Kellenberger (obsolete)
Published in: Kellenberger D. 2007
Database: ecoinvent
isCopyrightProtected: true
accessRestrictedTo: 1

## General comment
This dataset represents the construction of 1 gravel and sand mine infrastructure. Data was based on an evaluation of an operating plant with an excavated amount of about 400'000 to 500'000 t/a and the life time is assumed to be 50 years. Data was estimated based on an air-picture and sketches of the process.
[This dataset was already contained in the ecoinvent database version 2. It was not individually updated during the transfer to ecoinvent version 3. Life Cycle Impact Assessment results may still have changed, as they are affected by changes in the supply chain, i.e. in other datasets. This dataset was generated following the ecoinvent quality guidelines for version 2. It may have been subject to central changes described in the ecoinvent version 3 change report (http://www.ecoinvent.org/database/ecoinvent-version-3/reports-of-changes/), and the results of the central updates were reviewed extensively. The changes added e.g. consistent water flows and other information throughout the database. The documentation of this dataset can be found in the ecoinvent reports of version 2, which are still available via the ecoinvent website. The change report linked above covers all central changes that were made during the conversion process.]

## Included activities start
From unoccupied land foreseen for a gravel and sand mine.

## Included activities end
This activity ends with the constructed buildings and machineries for a gravel and sand mine. This dataset doesn't include the land-use of the mining activities (quarrying).

## Geography
Data was obtained from Swiss industries.

## Technology
The data of the infrastructure corresponds to the current level of technology.

## Reference product
- gravel/sand quarry infrastructure: 1 unit; By-product classification allocatable product; CPC 53269: Other constructions for manufacturing
  production volume 0.0336675 unit
  properties: carbon allocation 0 kg, carbon content 0, price 929571 EUR2005

## Inputs from technosphere
- building, hall, steel construction: 3000 m2; lognormal variance with pedigree 0.33, pedigree (3,5,5,1,1)
- building, multi-storey: 3120 m3; lognormal variance with pedigree 0.330025, pedigree (3,5,5,2,1)
- industrial machine, heavy, unspecified: 340000 kg; lognormal variance with pedigree 0.330025, pedigree (3,5,5,2,1)

## Inputs from nature
- Occupation, industrial area [natural resource, land]: 2.306e6 m2*year; lognormal variance with pedigree 0.0612, pedigree (2,3,5,1,1)
- Occupation, traffic area, road network [natural resource, land]: 734000 m2*year; lognormal variance with pedigree 0.0612, pedigree (2,3,5,1,1)
- Transformation, from unspecified [natural resource, land]: 60900 m2; lognormal variance with pedigree 0.1412, pedigree (2,3,5,1,1)
- Transformation, to industrial area [natural resource, land]: 46220 m2; lognormal variance with pedigree 0.1412, pedigree (2,3,5,1,1)
- Transformation, to traffic area, road network [natural resource, land]: 14700 m2; lognormal variance with pedigree 0.1412, pedigree (2,3,5,1,1)

## Sampling procedure
Measured data of four Swiss plants

## Extrapolations
See geography

## Review by Roberto Dones 2003-07-04
Passed

## Review by Roland Hischier 2011-09-22
Transfer of documentation done.
