# drying of maize straw and whole-plant

Dataset: EcoSpold 2, unit process
Geography: RoW
Time period: 1985-01-01 to 2022-12-31
Technology level: current
Classification: EcoSpold01Categories: agricultural means of production/work processes
Classification: ISIC rev.4 ecoinvent: 0163:Post-harvest crop activities
Tags: ConvertedDataset
Scenario: Business-as-Usual
System model: Substitution, consequential, long-term
Generated by: Silvio Blaser
Published in: Nemecek, T. 2007
Database: ecoinvent
isCopyrightProtected: true
accessRestrictedTo: 1

## General comment
The functional unit is kg water evaporated. This module should be used when evaluating drying of whole maize plant pellets.
[This dataset was already contained in the ecoinvent database version 2. It was not individually updated during the transfer to ecoinvent version 3. Life Cycle Impact Assessment results may still have changed, as they are affected by changes in the supply chain, i.e. in other datasets. This dataset was generated following the ecoinvent quality guidelines for version 2. It may have been subject to central changes described in the ecoinvent version 3 change report (http://www.ecoinvent.org/database/ecoinvent-version-3/reports-of-changes/), and the results of the central updates were reviewed extensively. The changes added e.g. consistent water flows and other information throughout the database. The documentation of this dataset can be found in the ecoinvent reports of version 2, which are still available via the ecoinvent website. The change report linked above covers all central changes that were made during the conversion process.]

## Included activities end
The inventory takes into account the energy demand (supplied by burning light fuel oil and consumption of electricity) for evaporating 1 kg of water, when drying maize plants (at 110-120°C). Also included in the inventory is the infrastructure (building and machinery). Inventoried outputs are heat waste and air emissions from combustion. Not included are waste and other air emissions (like dust). Production of the wet educt and utilisation of the dried product, are not included.

## Geography
The inventories are based on indications made by drying plants in Switzerland compared partially to values given in international references (Western Europe).

## Technology
The inventories are based on common grass and maize drying plants.

## Time period
Time of publication in literature and annual reports. Most publications between 2001 and 2002.

## Reference product
- drying of maize straw and whole-plant: 1 l; By-product classification allocatable product; CPC 86111: Post-harvest crop services
  production volume 2.92425e11 l
  properties: carbon allocation 0 kg, carbon content 0, price 0.0393652 EUR2005

## Inputs from technosphere
- building, hall: 2.18e-5 m2; lognormal variance with pedigree 0.3041, pedigree (3,2,5,5,1)
- cast iron: 0.000705 kg; lognormal variance with pedigree 0.018, pedigree (4,5,5,5,1)
  properties: carbon content, fossil 0.04, dry mass 1 kg, wet mass 1 kg
- electricity, low voltage: 0.001914, 0.000695793, 0.000142305, 0.000566098, 0.00408127, 0.00379961, 0.0340696, 0.00473136 kWh (8 suppliers, which the file names only by identifier); sum of these 0.05 kWh; lognormal variance with pedigree 0.0206, pedigree (2,5,5,5,1)
- heat, district or industrial, other than natural gas: 0.00412478, 0.483699, 2.36218 MJ (3 suppliers, which the file names only by identifier); sum of these 2.85 MJ; lognormal variance with pedigree 0.0032, pedigree (2,3,5,5,1)
  properties: heating value, net 1 MJ

## Inputs from nature
- Occupation, construction site [natural resource, land]: 0.00265 m2*year; lognormal variance with pedigree 0.0441, pedigree (3,2,5,5,1)
- Occupation, industrial area [natural resource, land]: 0.0441 m2*year; lognormal variance with pedigree 0.0441, pedigree (3,2,5,5,1)
- Transformation, from pasture, man made [natural resource, land]: 1.76e-5 m2; lognormal variance with pedigree 0.1241, pedigree (3,2,5,5,1)
- Transformation, to industrial area [natural resource, land]: 1.76e-5 m2; lognormal variance with pedigree 0.1241, pedigree (3,2,5,5,1)

## Extrapolations
Values are based partially on non verified measurements, on expert estimations and on international references. This dataset has been copied from an original dataset covering the geography CH. The uncertainty has been adjusted accordingly.

## Review by Roland Hischier 2003-06-03
Passed.
