# concrete, all types to generic market for concrete, medium strength

Dataset: EcoSpold 2, unit process
Geography: ZA
Time period: 2019-01-01 to 2022-12-31
Technology level: current
Classification: ISIC rev.4 ecoinvent: 2395:Manufacture of articles of concrete, cement and plaster
Scenario: Business-as-Usual
System model: Substitution, consequential, long-term
Generated by: Lucia Valsasina
Database: ecoinvent
isCopyrightProtected: true
accessRestrictedTo: 1

## General comment
This is a linking (transfering) activity which links the specific concrete types to the generic market for concrete, normal.
The shares of the different types of concrete are set based on production volumes of the respective activities and geographies.

## Included activities start
The activity starts with the reception of a specific concrete.

## Included activities end
The activity ends with concrete, normal which is supplied to the generic market for concrete, normal.

## Reference product
- concrete, medium strength: 1 m3; By-product classification allocatable product; CPC 37510: Non-refractory mortars and concretes
  production volume 77605.1 m3
  properties: carbon allocation 0 kg, carbon content 0, price 191 EUR2005

## Inputs from technosphere
- concrete, 40MPa: 0.821 m3
- concrete, 45MPa: 0.001 m3
- concrete, 50MPa: 0.178 m3
