# wheat production

Dataset: EcoSpold 2, unit process
Geography: IN
Time period: 2015-01-01 to 2022-12-31
Technology level: current
Classification: ISIC rev.4 ecoinvent: 0111:Growing of cereals (except rice), leguminous crops and oil seeds
Scenario: Business-as-Usual
System model: Substitution, consequential, long-term
Generated by: Sanjeevan Bajaj
Database: ecoinvent
isCopyrightProtected: true
accessRestrictedTo: 1

## General comment
This dataset represents the production of 1 kg of Wheat during November, 2015- April, 2016 at a farm located Village-Gadhera, District- Fatehgarh Sahib of Punjab. In this area, fields are irrigated with ground water using electric pump for surface irrigation. The farm has a yield of 5625 kg fresh matter per ha for this crop cycle. Sowing date for the crop is 14-November, 2015 and harvesting date is 13-April, 2016. Mineral NPK fertilizer input is 177.5-86.25kg/ha. Herbicide used has active ingredient as Piroxofop-Propanyl 60g/ha (Clodinafop-propargyl used as proxy), Sulfosulfuran 9.375g/ha, Metsulfuron 9.375g/ha (Metsulfuron-methyl used as proxy). Fungicide used has active ingredient as Azoxystrobin 54g/ha, Propiconazole 46.8g/ha, Butachlor 625g/ha (Alachlor used as proxy). Insecticides used has active ingredient as Imidachloropid 218.75g/ha, Thiamethoxam 187.5g/ha, and Buprofezin 156.25g/ha. Machinery is used only for soil cultivation with fuel consumption of 31.20 kg/ha using plough and other work. For seed sowing machines usage has led to fuel consumption of 7.8 kg/ha. Machinery is used for harvesting with fuel consumption of 67.6 kg/ha using Threshing with combine harvester, hay reaping.

## Included activities start
This activity starts about two weeks after the harvest of the previous crop. The soil is prepared for cultivation in first week of November and sowing of seeds started about two weeks after soil preparation. Thereafter the crop is mature for harvesting in about 5 months.

## Included activities end
The activity ends with the harvesting of the mature Wheat

## Technology
Cultivation of Wheat follows conventional production standards

## Time period
: Soil cultivating date for the main crop: 07-November, 2015; Harvesting date main crop: 13-April, 2016. The soil cultivation, sowing and harvesting dates are taken as the middle date of the week or fortnight told to the data collector by the farmer. Total time from date of sowing to date of harvesting comes to 180 days. The data is collected for one crop cycle. The cycle of one year is considered for entry in ecoeditor.

## Parameters
- LUC_crop_specific: 1 dimensionless
  This parameter allows to switch between a "crop specific" and a "country specific" approach when calculating the LUC of a crop. By default, the chosen approach is "crop specific", so the value of the parameter is 1. If you want to apply a "country specific" approach, turn the parameter to 0.

## Reference product
- wheat grain: 1 kg; By-product classification allocatable product; CPC 01112: Wheat, other
  production volume 8.652e10 kg
  properties: carbon allocation 0 kg, carbon content 0, price 0.22 EUR2005

## Inputs from technosphere
- [sulfonyl]urea-compound: 1.66667e-6 kg; lognormal variance with pedigree 0.0032, pedigree (2,4,3,1,1)
  properties: carbon content, fossil 0.540853, dry mass 1 kg, wet mass 1 kg
- acetamide-anillide-compound, unspecified: 0.000111111 kg; lognormal variance with pedigree 0.0032, pedigree (2,4,3,1,1)
  properties: carbon content, fossil 0.659175, dry mass 1 kg, wet mass 1 kg
- combine harvesting: 5.41341e-5 ha; lognormal variance with pedigree 0.0032, pedigree (2,4,3,1,1)
- cyclic N-compound: 0.00010832 kg; lognormal variance with pedigree 0.0032, pedigree (2,4,3,1,1)
  properties: carbon content, fossil 0.641962, dry mass 1 kg, wet mass 1 kg
- diesel, burned in agricultural machinery: 0.509651 MJ; lognormal variance with pedigree 0.0032, pedigree (2,4,3,1,1)
- diphenylether-compound: 1.06667e-5 kg; lognormal variance with pedigree 0.0032, pedigree (2,4,3,1,1)
  properties: carbon content, fossil 0.560061, dry mass 1 kg, wet mass 1 kg
- inorganic nitrogen fertiliser, as N: 0.00631111 kg; lognormal variance with pedigree 0.0032, pedigree (2,4,3,1,1)
  properties: dry mass 1 kg, wet mass 1 kg
- inorganic phosphorus fertiliser, as P2O5: 0.0153333 kg; lognormal variance with pedigree 0.0032, pedigree (2,4,3,1,1)
  properties: dry mass 1 kg, wet mass 1 kg
- irrigation: 0.2232 m3; lognormal variance with pedigree 0.0032, pedigree (2,4,3,1,1)
  properties: dry mass 0.11 kg, water content 9089.91, wet mass 1000 kg
- land use change, annual crop: 1.28992e-5 ha
- naphtha: 0.000112 kg; lognormal variance with pedigree 0.0032, pedigree (2,4,3,1,1)
  properties: carbon content, fossil 0.919743, dry mass 1 kg, heating value, net 45 MJ, wet mass 1 kg
- nitrile-compound: 9.6e-6 kg; lognormal variance with pedigree 0.0032, pedigree (2,4,3,1,1)
  properties: carbon content, fossil 0.344995, dry mass 1 kg, wet mass 1 kg
- packaging, for fertilisers: 0.0937778 kg; lognormal variance with pedigree 0.0512, pedigree (4,3,3,5,4)
  properties: carbon content, fossil 0.825301, dry mass 1 kg, heating value, net 25.01 MJ, price 0.0642 EUR2005, wet mass 1 kg
- packaging, for pesticides: 0.000486062 kg; lognormal variance with pedigree 0.0512, pedigree (4,3,3,5,4)
  properties: carbon content, fossil 0.85714, dry mass 1 kg, heating value, net 25.97 MJ, price 0.0642 EUR2005, wet mass 1 kg
- sowing: 0.000363002 ha; lognormal variance with pedigree 0.0032, pedigree (2,4,3,1,1)
- tillage, ploughing: 0.000170013 ha; lognormal variance with pedigree 0.0032, pedigree (2,4,3,1,1)
- triazine-compound, unspecified: 1.66667e-6 kg; lognormal variance with pedigree 0.0032, pedigree (2,4,3,1,1)
  properties: carbon content, fossil 0.475616, dry mass 1 kg, wet mass 1 kg
- urea: 0.054119 kg; lognormal variance with pedigree 0.0032, pedigree (2,4,3,1,1)
  properties: carbon content, fossil 0.2, dry mass 1 kg, wet mass 1 kg
- wheat seed, for sowing: 0.0191111 kg; lognormal variance with pedigree 0.0032, pedigree (2,4,3,1,1)
  properties: carbon content, non-fossil 0.464601, dry mass 0.85 kg, water content 0.176471, wet mass 1 kg

## Inputs from nature
- Carbon dioxide, in air [natural resource, in air]: 1.3209 kg; lognormal variance with pedigree 0.0032, pedigree (2,4,3,1,1)
- Energy, gross calorific value, in biomass [natural resource, biotic]: 15.3935 MJ; lognormal variance with pedigree 0.0032, pedigree (2,4,3,1,1)
- Occupation, annual crop, irrigated [natural resource, land]: 0.814815 m2*year; lognormal variance with pedigree 0.0046, pedigree (2,4,3,1,1)
- Transformation, from annual crop, irrigated [natural resource, land]: 1.77778 m2; lognormal variance with pedigree 0.0106, pedigree (2,4,3,1,1)
- Transformation, to annual crop, irrigated [natural resource, land]: 1.77778 m2; lognormal variance with pedigree 0.0106, pedigree (2,4,3,1,1)

## Emissions to nature
- Ammonia [air, non-urban air or from high stacks]: 0.00564008 kg; lognormal variance with pedigree 0.0106, pedigree (2,4,3,1,1)
- Carbon dioxide, fossil [air, non-urban air or from high stacks]: 0.0396593 kg; lognormal variance with pedigree 0.0032, pedigree (2,4,3,1,1)
- Dinitrogen monoxide [air, non-urban air or from high stacks]: 0.000800171 kg; lognormal variance with pedigree 0.0326, pedigree (2,4,3,1,1)
- Nitrogen oxides [air, non-urban air or from high stacks]: 0.00193524 kg; lognormal variance with pedigree 0.0426, pedigree (2,4,3,1,1)
- Water [air, non-urban air or from high stacks]: 0.113832 m3; lognormal variance with pedigree 0.0032, pedigree (2,4,3,1,1)
- Alachlor [soil, agricultural]: 0.000111111 kg; lognormal variance with pedigree 0.0356, pedigree (2,4,3,1,1)
- Azoxystrobin [soil, agricultural]: 9.6e-6 kg; lognormal variance with pedigree 0.0356, pedigree (2,4,3,1,1)
- Buprofezin [soil, agricultural]: 2.77778e-5 kg; lognormal variance with pedigree 0.0356, pedigree (2,4,3,1,1)
- Cadmium II [soil, agricultural]: 6.33652e-7 kg; lognormal variance with pedigree 0.0426, pedigree (2,4,3,1,1)
- Chromium III [soil, agricultural]: 5.06025e-6 kg; lognormal variance with pedigree 0.0426, pedigree (2,4,3,1,1)
- Clodinafop-propargyl [soil, agricultural]: 1.06667e-5 kg; lognormal variance with pedigree 0.0356, pedigree (2,4,3,1,1)
- Copper ion [soil, agricultural]: -5.08654e-6 kg
- Imidacloprid [soil, agricultural]: 3.88889e-5 kg; lognormal variance with pedigree 0.0356, pedigree (2,4,3,1,1)
- Lead II [soil, agricultural]: -6.85613e-7 kg
- Mercury II [soil, agricultural]: -2.18504e-8 kg
- Metsulfuron-methyl [soil, agricultural]: 1.66667e-6 kg; lognormal variance with pedigree 0.0356, pedigree (2,4,3,1,1)
- Mineral oil [soil, agricultural]: 0.000112 kg; lognormal variance with pedigree 0.0356, pedigree (2,4,3,1,1)
- Nickel II [soil, agricultural]: -8.30914e-7 kg
- Propiconazole [soil, agricultural]: 8.32e-6 kg; lognormal variance with pedigree 0.0356, pedigree (2,4,3,1,1)
- Sulfosulfuron [soil, agricultural]: 1.66667e-6 kg; lognormal variance with pedigree 0.0356, pedigree (2,4,3,1,1)
- Thiamethoxam [soil, agricultural]: 3.33333e-5 kg; lognormal variance with pedigree 0.0356, pedigree (2,4,3,1,1)
- Zinc II [soil, agricultural]: -2.10634e-5 kg
- Cadmium II [water, ground-]: 3.80085e-9 kg; lognormal variance with pedigree 0.0926, pedigree (2,4,3,1,1)
- Cadmium II [water, surface water]: 1.64718e-8 kg; lognormal variance with pedigree 0.0926, pedigree (2,4,3,1,1)
- Chromium III [water, ground-]: 1.67333e-6 kg; lognormal variance with pedigree 0.0926, pedigree (2,4,3,1,1)
- Chromium III [water, surface water]: 1.71744e-6 kg; lognormal variance with pedigree 0.0926, pedigree (2,4,3,1,1)
- Copper ion [water, ground-]: 2.70918e-7 kg; lognormal variance with pedigree 0.0926, pedigree (2,4,3,1,1)
- Copper ion [water, surface water]: 1.36568e-6 kg; lognormal variance with pedigree 0.0926, pedigree (2,4,3,1,1)
- Lead II [water, ground-]: 1.75673e-8 kg; lognormal variance with pedigree 0.0926, pedigree (2,4,3,1,1)
- Lead II [water, surface water]: 5.15474e-7 kg; lognormal variance with pedigree 0.0926, pedigree (2,4,3,1,1)
- Mercury II [water, ground-]: 8.84326e-11 kg; lognormal variance with pedigree 0.0926, pedigree (2,4,3,1,1)
- Mercury II [water, surface water]: 4.48343e-9 kg; lognormal variance with pedigree 0.0926, pedigree (2,4,3,1,1)
- Nickel II [water, surface water]: 1.3504e-6 kg; lognormal variance with pedigree 0.0926, pedigree (2,4,3,1,1)
- Nitrate [water, ground-]: 0.0251206 kg; lognormal variance with pedigree 0.0426, pedigree (2,4,3,1,1)
- Phosphate [water, ground-]: 1.74886e-5 kg; lognormal variance with pedigree 0.0426, pedigree (2,4,3,1,1)
- Phosphate [water, surface water]: 5.3149e-5 kg; lognormal variance with pedigree 0.0426, pedigree (2,4,3,1,1)
- Phosphorus [water, surface water]: 0.000151153 kg; lognormal variance with pedigree 0.0426, pedigree (2,4,3,1,1)
- Water [water, ground-]: 0.087048 m3; lognormal variance with pedigree 0.0032, pedigree (2,4,3,1,1)
- Water [water, surface water]: 0.02232 m3; lognormal variance with pedigree 0.0032, pedigree (2,4,3,1,1)
- Zinc II [water, ground-]: 1.82013e-6 kg; lognormal variance with pedigree 0.0926, pedigree (2,4,3,1,1)
- Zinc II [water, surface water]: 2.46995e-6 kg; lognormal variance with pedigree 0.0926, pedigree (2,4,3,1,1)

## Sampling procedure
The farmer was identified and contacted by agriculture science faculty familiar with the local farmers in the region. Data was collected directly from the farmer through semi-structured interview using a questionnaire based on the input requirements of the ecoinvent LCI calculation tool for crop production. The farmer does not maintain any written records and has provided the data from recent memory. In this region, typically farmers are unable to provide exact name of active ingredient in the pesticide they use and the same was noted from details given on the pesticide packet. Individual farmer is not able to calculate fuel consumption for his own farm alone and this information has been collected from farming community of the area

## Extrapolations
Ecoinvent LCI calculation tool for crop production was used to calculate field emissions from the cultivation process.
