# nutrient supply from potassium sulfate

Dataset: EcoSpold 2, unit process
Geography: RoW
Time period: 2016-01-01 to 2022-12-31
Technology level: current
Classification: ISIC rev.4 ecoinvent: 0161:Support activities for crop production
Scenario: Business-as-Usual
System model: Substitution, consequential, long-term
Generated by: Avraam Symeonidis
Database: ecoinvent
isCopyrightProtected: true
accessRestrictedTo: 1

## General comment
This inventory describes the supply of nutrients from ''potassium sulfate'' for fertiliser use.
No machinery expenditures or emissions to the environment are considered related to the actual application of this substance on soil during its agricultural use. The purpose of this activity is to connect the chemical production of ''potassium sulfate'' with its generic use as fertilizer. The product ''potassium sulfate'' is connected to the generic market for ''inorganic potassium fertiliser, as K2O'' through this supplying activity. In the agricultural context, ''potassium sulfate'' can be used directly as a fertilizer input to crop production, eventually with other chemicals; alternatively, a generic input of ''inorganic potassium fertiliser, as K2O'' can be used instead, and this will represent the regional consumption mix for his type of nutrient. A way in between is allowed by using the generic input ''inorganic potassium fertiliser, as K2O'' and link to the activity providing it from a specific chemical.
In all cases, emissions associated to the application of the fertilizer have to be calculated in the crop production activity.

## Technology
Inventory based on composition of ''potassium sulfate''.

## Reference product
- inorganic potassium fertiliser, as K2O: 1 kg; By-product classification allocatable product; CPC 3463: Mineral or chemical fertilizers, potassic
  production volume 2.81857e8 kg
  properties: carbon allocation 0 kg, carbon content 0, carbon content, fossil 0, carbon content, non-fossil 0, dry mass 1 kg, oxygen content 0.169852, potassium content 0.830148, price 0.188 EUR2005, water content 0, water in wet mass 0 kg, wet mass 1 kg

## Inputs from technosphere
- potassium sulfate: 1.84996 kg; lognormal variance with pedigree 0.17, pedigree (3,5,2,1,4)
  properties: dry mass 1 kg, oxygen content 0.367255, potassium content 0.448737, sulfur content 0.184008, wet mass 1 kg
