# heat production, at hot water tank, solar+gas, flat plate, multiple dwelling

Dataset: EcoSpold 2, unit process
Geography: CH
Time period: 2002-01-01 to 2022-12-31
Technology level: current
Classification: ISIC rev.4 ecoinvent: 3530:Steam and air conditioning supply
Classification: EcoSpold01Categories: solar collector systems/systems
Synonyms: MFD; Multiple family dwelling
Tags: ConvertedDataset
Scenario: Business-as-Usual
System model: Substitution, consequential, long-term
Generated by: Niels Jungbluth
Published in: Jungbluth, N. 2007
Database: ecoinvent
isCopyrightProtected: true
accessRestrictedTo: 1

## General comment
Use of a solar system including the necessary auxiliary heating.
[This dataset was already contained in the ecoinvent database version 2. It was not individually updated during the transfer to ecoinvent version 3. Life Cycle Impact Assessment results may still have changed, as they are affected by changes in the supply chain, i.e. in other datasets. This dataset was generated following the ecoinvent quality guidelines for version 2. It may have been subject to central changes described in the ecoinvent version 3 change report (http://www.ecoinvent.org/database/ecoinvent-version-3/reports-of-changes/), and the results of the central updates were reviewed extensively. The changes added e.g. consistent water flows and other information throughout the database. The documentation of this dataset can be found in the ecoinvent reports of version 2, which are still available via the ecoinvent website. The change report linked above covers all central changes that were made during the conversion process.]

## Included activities end
Delivery of heat with a solar system including the necessary auxiliary heating, maintenance and electricity use for operation.

## Geography
Plant used in CH.

## Technology
Operation of a solar collector system in combination with a gas heating.

## Time period
Time of simulation.

## Reference product
- heat, solar+gas, multiple-dwelling, for hot water: 1 MJ; By-product classification allocatable product; CPC 17300: Steam and hot water
  properties: carbon allocation 0 kg, carbon content 0, price 0.0157373 EUR2005

## Inputs from technosphere
- electricity, low voltage: 0.0003972 kWh; lognormal variance with pedigree 0.0092, pedigree (2,5,5,1,1)
- heat, central or small-scale, natural gas: 0.84304 MJ; lognormal variance with pedigree 0.0092, pedigree (2,5,5,1,1)
  properties: heating value, net 1 MJ
- solar collector system, Cu flat plate collector, multiple dwelling, hot water: 6.5545e-8 unit; lognormal variance with pedigree 0.3086, pedigree (2,5,5,1,1)

## Inputs from nature
- Energy, solar, converted [natural resource, in air]: 0.28851 MJ; lognormal variance with pedigree 0.001189, pedigree (2,1,5,1,1)

## Sampling procedure
Simulation done by SPF Rapperswil with Polysun 3.3 computer programme.

## Review by Sebastiano Meier 2007-08-13
passed
none
