# cadmium chloride production, semiconductor-grade

Dataset: EcoSpold 2, unit process
Geography: RoW
Time period: 2004-01-01 to 2022-12-31
Technology level: current
Classification: ISIC rev.4 ecoinvent: 2011:Manufacture of basic chemicals
Classification: EcoSpold01Categories: metals/extraction
Tags: ConvertedDataset
Scenario: Business-as-Usual
System model: Substitution, consequential, long-term
Share of production covered: 0 %
Generated by: Matthias Tuchschmid (obsolete)
Published in: Classen M. 2009
Database: ecoinvent
isCopyrightProtected: true
accessRestrictedTo: 1

## General comment
This datasets describes the production of high-grade cadmium chloride (99.999%) from cadmium and hydrochloric acid. This purity of cadmium chloride can be used in the production of thin film solar cells.
[This dataset was already contained in the ecoinvent database version 2. It was not individually updated during the transfer to ecoinvent version 3. Life Cycle Impact Assessment results may still have changed, as they are affected by changes in the supply chain, i.e. in other datasets. This dataset was generated following the ecoinvent quality guidelines for version 2. It may have been subject to central changes described in the ecoinvent version 3 change report (http://www.ecoinvent.org/database/ecoinvent-version-3/reports-of-changes/), and the results of the central updates were reviewed extensively. The changes added e.g. consistent water flows and other information throughout the database. The documentation of this dataset can be found in the ecoinvent reports of version 2, which are still available via the ecoinvent website. The change report linked above covers all central changes that were made during the conversion process.]

## Included activities end
The energy consumption, emissions and transports are estimated.

## Geography
Production in US

## Technology
Production of cadmium chloride by reaction of cadmium with hydrogen chloride

## Reference product
- cadmium chloride, semiconductor-grade: 1 kg; By-product classification allocatable product; CPC 342: Basic inorganic chemicals n.e.c.
  production volume 1386.04 kg
  properties: carbon allocation 0 kg, carbon content 0, carbon content, fossil 0, carbon content, non-fossil 0, dry mass 1 kg, price 0.816003 EUR2005, water content 0, water in wet mass 0 kg, wet mass 1 kg

## Inputs from technosphere
- cadmium, semiconductor-grade: 0.64597 kg; lognormal variance with pedigree 0.2942, pedigree (5,4,5,5,5)
  properties: dry mass 1 kg, wet mass 1 kg
- chemical factory, organics: 4e-10 unit; lognormal variance with pedigree 0.5482, pedigree (4,5,5,5,5)
- electricity, medium voltage: 0.0038159, 0.000706617, 0.000142773, 0.00181397, 0.0314837, 0.000141696, 0.000584252, 0.00389705 kWh (8 suppliers, which the file names only by identifier); sum of these 0.042586 kWh; lognormal variance with pedigree 0.2942, pedigree (5,4,5,5,5)
- hydrochloric acid, without water, in 30% solution state: 0.34616, 0.0729199 kg (2 suppliers, which the file names only by identifier); sum of these 0.41908 kg; lognormal variance with pedigree 0.2942, pedigree (5,4,5,5,5)
  properties: dry mass 1 kg, heating value, net 3.32 MJ, wet mass 1 kg

## Emissions to nature
- Cadmium II [air, urban air close to ground]: 3.8758e-6 kg; lognormal variance with pedigree 0.9502, pedigree (5,5,5,5,5)
- Hydrogen [air, urban air close to ground]: 0.011465 kg; lognormal variance with pedigree 0.3502, pedigree (5,5,5,5,5)

## Sampling procedure
literature and own estimations

## Extrapolations
Cadmium emissions are extrapolated from cadmium purification. This dataset has been copied from an original dataset covering the geography US. The uncertainty has been adjusted accordingly.

## Review by Hans-Jörg Althaus 2009-01-29
automatic validation in Excel
none
