# hafnium sponge production, from hafnium tetrachloride

Dataset: EcoSpold 2, unit process
Geography: RoW
Time period: 2020-01-01 to 2024-12-31
Technology level: current
Classification: ISIC rev.4 ecoinvent: 2420:Manufacture of basic precious and other non-ferrous metals
Scenario: Business-as-Usual
System model: Substitution, consequential, long-term
Generated by: Efstathios Kakkos
Database: ecoinvent
isCopyrightProtected: true
accessRestrictedTo: 1

## General comment
This dataset refers to the average global production of 1 kg of hafnium sponge from high-purity hafnium tetrachloride (HfCl4) (produced from the zirconium / hafnium separation process) by magnesium reduction and vaccum distillation (Kroll process - HfCl4 + 2Mg → Hf + 2MgCl2). France and the US are the major producers of hafnium sponge, representing 85% of the global production.
The amounts of total magnesium input, hafnium tetrachloride input and total magnesium chloride produced as a byproduct are based on the abovementioned stoichiometric equation. Infrastructural input has been included for compliance with the Ecoinvent guidelines. Due to lack of data, the electricity consumption and inert waste during the hafnium sponge production process were approximated with the respective ones from the titanium sponge production dataset, since they are both produced via the Kroll process under similar conditions (consult dataset ''titanium sponge production, from titanium tetrachloride, GLO'' available in version 3.8 of the Ecoinvent database and the respective exchange comments in the present dataset). The amount of inert waste, taken from the aforementioned dataset, was adjusted based on the amount of magnesium chloride produced as byproduct.

## Included activities start
The activity starts with the processing of high-purity hafnium tetrachloride (HfCl4).

## Included activities end
The activity ends with the production of hafnium sponge. MgCl2 is produced as byproduct and is sent to an electrolysis process (modelled in a separate activity) in order to recover the magnesium and chlorine. The magnesium is refined and recycled back to the distillation and reduction process for producing hafnium sponge, while the chlorine is recycled back to the chlorination and extractive distillation process for the production of ZrCl4 and HfCl4.

## Allocation
No allocation is applied.

## Geography
Dataset valid for the entire corresponding region. France and the US are the major producers of hafnium sponge, representing 85% of the global hafnium production.

## Technology
The HfCl4 is placed in a furnace at 850 °C and is subsequently reduced through the addition of magnesium. The stoichiometric equation is the following: HfCl4 + 2 Mg → Hf + 2 MgCl2. The produced hafnium sponge undergoes vacuum distillation, where the sponge is purified by removing the magnesium chloride, which is then separated via the electrolysis process, producing magnesium and chlorine (MgCl2 → Mg + Cl2). After refining, the magnesium is recycled and serves again as input to the reduction process, while chlorine (after it is filtrated and purified) is recycled and sent back to the chlorination process as an input.

## Time period
Data are considered representative of current production practices.

## Reference product
- hafnium sponge: 1 kg; By-product classification allocatable product; CPC 41601: Tungsten, molybdenum, tantalum, magnesium, cobalt, cadmium, titanium, zirconium, beryllium, gallium, hafnium, […]
  production volume 12750 kg
  properties: carbon allocation 0 kg, carbon content 0, carbon content, fossil 0, carbon content, non-fossil 0, dry mass 1 kg, hafnium content 0.998, price 678.596 EUR2005, water content 0, water in wet mass 0 kg, wet mass 1 kg

## Inputs from technosphere
- chemical factory, organics: 4e-10 unit; lognormal variance with pedigree 0.3112, pedigree (3,3,1,4,3)
- electricity, medium voltage: 0.00108896, 0.0068153, 0.00150973, 0.0205533, 0.00366548, 0.0653999, 0.0103205, 0.0152918, 0.437504, 0.00155999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 kWh (46 suppliers, which the file names only by identifier); sum of these 4.85 kWh; lognormal variance with pedigree 0.0454, pedigree (2,4,2,5,4)
- hafnium tetrachloride: 1.7945 kg; lognormal variance with pedigree 0.0015, pedigree (1,3,2,3,1)
  properties: chlorine content 0.4427, dry mass 1 kg, hafnium content 0.5573, wet mass 1 kg
- inert waste: -6.07935e-5, -0.0248806 kg (2 suppliers, which the file names only by identifier); sum of these -0.0249414 kg; lognormal variance with pedigree 0.0454, pedigree (2,4,2,5,4)
  properties: dry mass 1 kg, hafnium content 0.0831889, wet mass 1 kg
- magnesium: 0.0108522 kg; lognormal variance with pedigree 0.0454, pedigree (2,4,2,5,4)
  properties: dry mass 1 kg, wet mass 1 kg
- magnesium chloride, from hafnium sponge production: -1.04191 kg; lognormal variance with pedigree 0.0015, pedigree (1,3,2,3,1)
  properties: chlorine content 0.7447, dry mass 1 kg, magnesium content 0.2553, price 0.0935471 EUR2005, wet mass 1 kg
- magnesium, for reuse in hafnium sponge production: 0.261488 kg; lognormal variance with pedigree 0.0454, pedigree (2,4,2,5,4)
  properties: dry mass 1 kg, magnesium content 1, price 11 EUR2005, wet mass 1 kg

## Sampling procedure
The amount of HfCl4, total magnesium (sum of recycled magnesium and non-recovered magnesium) and total magnesium chloride (without the minor loss - see below) were calculated based on the stoichiometric equation: HfCl4 + 2Mg → Hf + 2MgCl2. Infrastructure has been included for compliance with the Ecoinvent guidelines. An activity link has been set to the hafnium tetrachloride in order to ensure that hafnium tetrachloride is supplied from the producing activity of the same geography. An activity link has also been set to the magnesium chloride, to ensure that the magnesium chloride is sent to the electrolysis process in the same geography.

Furthermore, due to the electrolysis process of magnesium chloride (MgCl2 → Mg + Cl2), magnesium is produced as byproduct, which is recycled and fed back to the hafnium sponge production process (present dataset).

All other data (electricity consumption and inert waste) were taken as a proxy from the dataset ''titanium sponge production, from titanium tetrachloride, GLO'' as found in Ecoinvent version 3.8, which deals with the production of titanium sponge through the Kroll process (TiCl4+ 2Mg → Ti + 2MgCl2 - same process used for the production of hafnium sponge), which was based on the Gao et al. (2018) publication. The inert waste is assumed to be magnesium chloride that is lost thereby reducing the actual amount of produced magnesium chloride from 1.06685 kg to 1.0419 kg that is sent to electrolysis. The amount of inert waste taken from the aforementioned dataset was adjusted based on the amount of magnesium chloride produced as byproduct. The amount of recycled magnesium was based on the fact that the overall recovery rate of magnesium is 96%. These assumptions were taken from the abovementioned datasets. For more detailed information, the individual exchange comments have to be consulted.

Reference: Gao, F., Nie, Z., Yang, D., Sun, B., Liu, Y., Gong, X., & Wang, Z. (2018). Environmental impacts analy-sis of titanium sponge production using Kroll process in China. Journal of Cleaner Production, 174, 771-779. doi:https://doi.org/10.1016/j.jclepro.2017.09.240.

## Extrapolations
Approximation of hafnium sponge production with the titanium sponge production, as they are both produced via the Kroll process under similar conditions. Uncertainty has been adjusted accordingly.
