# sugarcane loading, by loader

Dataset: EcoSpold 2, unit process
Geography: BR
Time period: 2012-01-01 to 2022-12-31
Technology level: current
Classification: EcoSpold01Categories: agricultural means of production/work processes
Classification: ISIC rev.4 ecoinvent: 0161:Support activities for crop production
Scenario: Business-as-Usual
System model: Substitution, consequential, long-term
Generated by: Otávio Cavalett
Published in: Cavalett O. 2016
Database: ecoinvent
isCopyrightProtected: true
accessRestrictedTo: 1

## General comment
This dataset represents the manually harvested sugarcane loading operation in one hectare (ha). This operation only occurs when the sugarcane is manually harvested. Functional unit (FU) is one hectare of sugarcane loading. The operation time is about 3.88 hours per ha (75.8% of this time is effectively worked, discounting time for maintenance, waiting in the field and re-allocations between the plots).

## Included activities start
From manually harvested sugarcane in the agricultural field to be loaded.

## Included activities end
This activity includes the sugarcane loading into the transport truck, and ends with sugarcane transfered to the transport trucks. The dataset includes the diesel fuel consumption (9.62 L of diesel per hour of effective operation) and the amount of agricultural machinery and shed. Also taken into consideration is the amount of emissions to the air from diesel combustion and the emission to the soil from tyre abrasion during the work process.

## Geography
The dataset is modeled for sugarcane production system in Brazilian South-Cental region.

## Technology
This activity is performed with a sugarcane grab loader (power 90 hp; weight 3400 kg). Life spam of the machinery is considered as 8000 operating hours. Machinery used, fuel consumption and operation efficiencies were based on data from sugarcane mills in Brazil, expert's informations and unpublished data.

## Time period
Most of the data used to modelling this activity were collected in the last few years (2012-2014).

## Reference product
- sugarcane loading, by loader: 1 ha; By-product classification allocatable product; CPC 86119: Other support services to crop production
  production volume 1.17088e6 ha
  properties: carbon allocation 0 kg, carbon content 0, price 15.5122 EUR2005

## Inputs from technosphere
- diesel: 17.3401 kg; lognormal variance with pedigree 0.0007, pedigree (2,2,4,1,1)
  properties: carbon content, fossil 0.865, dry mass 1 kg, heating value, net 42.8 MJ, wet mass 1 kg
- shed: 0.002 m2; lognormal variance with pedigree 0.0107, pedigree (3,3,4,3,3)
- tractor, 4-wheel, agricultural: 1.64723 kg; lognormal variance with pedigree 0.0007, pedigree (2,2,4,1,1)

## Emissions to nature
- Ammonia [air, non-urban air or from high stacks]: 0.000347 kg; lognormal variance with pedigree 0.0601, pedigree (3,2,4,1,3)
- Benzene [air, non-urban air or from high stacks]: 0.000127 kg; lognormal variance with pedigree 0.0601, pedigree (3,2,4,1,3)
- Benzo(a)pyrene [air, non-urban air or from high stacks]: 5.2e-7 kg; lognormal variance with pedigree 0.6601, pedigree (3,2,4,1,3)
- Cadmium II [air, non-urban air or from high stacks]: 1.73e-7 kg; lognormal variance with pedigree 0.6601, pedigree (3,2,4,1,3)
- Carbon dioxide, fossil [air, non-urban air or from high stacks]: 54.1 kg; lognormal variance with pedigree 0.0201, pedigree (3,2,4,1,3)
- Carbon monoxide, fossil [air, non-urban air or from high stacks]: 0.09364 kg; lognormal variance with pedigree 0.6601, pedigree (3,2,4,1,3)
- Chromium III [air, non-urban air or from high stacks]: 8.67e-7 kg; lognormal variance with pedigree 0.6601, pedigree (3,2,4,1,3)
- Copper ion [air, non-urban air or from high stacks]: 2.95e-5 kg; lognormal variance with pedigree 0.6601, pedigree (3,2,4,1,3)
- Dinitrogen monoxide [air, non-urban air or from high stacks]: 0.00208 kg; lognormal variance with pedigree 0.0601, pedigree (3,2,4,1,3)
- Methane, fossil [air, non-urban air or from high stacks]: 0.00224 kg; lognormal variance with pedigree 0.0601, pedigree (3,2,4,1,3)
- NMVOC, non-methane volatile organic compounds [air, non-urban air or from high stacks]: 0.05202 kg; lognormal variance with pedigree 0.0601, pedigree (3,2,4,1,3)
- Nickel II [air, non-urban air or from high stacks]: 1.21e-6 kg; lognormal variance with pedigree 0.6601, pedigree (3,2,4,1,3)
- Nitrogen oxides [air, non-urban air or from high stacks]: 0.73695 kg; lognormal variance with pedigree 0.0501, pedigree (3,2,4,1,3)
- PAH, polycyclic aromatic hydrocarbons [air, non-urban air or from high stacks]: 5.7e-5 kg; lognormal variance with pedigree 0.3201, pedigree (3,2,4,1,3)
- Particulate Matter, < 2.5 um [air, non-urban air or from high stacks]: 0.14056 kg; lognormal variance with pedigree 0.0601, pedigree (3,2,4,1,3)
- Selenium IV [air, non-urban air or from high stacks]: 1.73e-7 kg; lognormal variance with pedigree 0.0601, pedigree (3,2,4,1,3)
- Sulfur dioxide [air, non-urban air or from high stacks]: 0.0175 kg; lognormal variance with pedigree 0.0201, pedigree (3,2,4,1,3)
- Zinc II [air, non-urban air or from high stacks]: 1.73e-5 kg; lognormal variance with pedigree 0.6601, pedigree (3,2,4,1,3)
- Cadmium II [soil, agricultural]: 5e-5 kg; lognormal variance with pedigree 0.044, pedigree (3,4,4,1,1)
- Lead II [soil, agricultural]: 0.00021 kg; lognormal variance with pedigree 0.044, pedigree (3,4,4,1,1)
- Zinc II [soil, agricultural]: 0.0013 kg; lognormal variance with pedigree 0.044, pedigree (3,4,4,1,1)

## Sampling procedure
The main source of data for agricultural inputs and operations modelling procedures is detailed in Cavalett et al., 2016. Emissions from the agricultural process are estimated according to Nemecek and Kagi, 2007.

## Extrapolations
Figures in the inventory represent national average.

## Review by Jens Lansche 2018-02-23
All review comments considered
