# benzal chloride production

Dataset: EcoSpold 2, unit process
Geography: RER
Time period: 2000-01-01 to 2022-12-31
Technology level: current
Classification: EcoSpold01Categories: chemicals/organics
Classification: ISIC rev.4 ecoinvent: 2011:Manufacture of basic chemicals
Synonyms: benzylidene chloride; dichlorotoluene; dichloromethylbenzene
Tags: ConvertedDataset
Scenario: Business-as-Usual
System model: Substitution, consequential, long-term
Share of production covered: 100 %
Generated by: Jürgen Sutter
Published in: Sutter, J. 2007
Database: ecoinvent
isCopyrightProtected: true
accessRestrictedTo: 1

## General comment
This data represents the production of 1 kg of pure benzal chloride via the chlorination of toluene. Raw materials are modelled with a stoichiometric calculation. Energy consumptions are modelled with literature data. The emissions are estimated. Infrastructure is included with a default value.
[This dataset was already contained in the ecoinvent database version 2. It was not individually updated during the transfer to ecoinvent version 3. Life Cycle Impact Assessment results may still have changed, as they are affected by changes in the supply chain, i.e. in other datasets. This dataset was generated following the ecoinvent quality guidelines for version 2. It may have been subject to central changes described in the ecoinvent version 3 change report (http://www.ecoinvent.org/database/ecoinvent-version-3/reports-of-changes/), and the results of the central updates were reviewed extensively. The changes added e.g. consistent water flows and other information throughout the database. The documentation of this dataset can be found in the ecoinvent reports of version 2, which are still available via the ecoinvent website. The change report linked above covers all central changes that were made during the conversion process.]

## Included activities start
From the reception of toluene at the factory gate.

## Included activities end
This activity ends with 1 kg of benzal chloride, 100% at the factory gate. The dataset includes the input materials, energy uses, infrastructure and emissions.

## Geography
The inventory is modelled for Europe.

## Technology
Benzal chloride is produced by the side-chain chlorination of toluene.
Reference:
Rossberg, M., Lendle, W., Pfleiderer, G., Tögel, A., Dreher, E.-L., Langer, E., Rassaerts, H., Kleinschmidt, P., Strack, H., Cook, R., Beck, B., Lipper, K.-A., Torkelson, T., Löser, E., Beutel, K.: Chlorinated Hydrocarbons. In: Ullmann's Encyclopedia of Industrial Chemistry, Seventh Edition, 2004 Electronic Release (ed. Fiedler E., Grossmann G., Kersebohm D., Weiss G. and Witte C.). 7 th Electronic Release Edition. Wiley InterScience, New York, Online-Version under: http://www.mrw.interscience.wiley.com/ueic/articles/

## Time period
Time of publications

## Parameters
- fraction, cooling water, cooling pond system, to air: 0.032 dimensionless; name fraction_CW_CP_to_air; lognormal variance with pedigree 0.0413, pedigree (2,3,1,3,1)
  Calculated based on literature value (Scown, C.D., 2011, Water Footprint of U.S. Transportation Fuels and supplying information of the article) (Vionnet, S., Quantis Water Database - Technical Report, 2012).
- fraction, cooling water, once-through system, to air: 0.004 dimensionless; name fraction_CW_OT_to_air; lognormal variance with pedigree 0.0413, pedigree (2,3,1,3,1)
  (same comment as for fraction, cooling water, cooling pond system, to air)
- fraction, cooling water, recirculating system, to air: 0.771 dimensionless; name fraction_CW_R_to_air; lognormal variance with pedigree 0.0413, pedigree (2,3,1,3,1)
  (same comment as for fraction, cooling water, cooling pond system, to air)
- fraction, cooling water, to air: 0.3875 dimensionless; name fraction_CW_to_air; = (0.5*fraction_CW_OT_to_air)+(0.5*fraction_CW_R_to_air); lognormal variance with pedigree 0.092025, pedigree (4,4,3,2,4)
  Calculated value based on literature value (see comments of the other parametres present in this dataset) and expert opinion. In the case when no industry/literature data are available about the type of cooling or directly fraction, cooling water, to air specific for the process a default assumption is applied. It is assumed that the once-through cooling system is used in 50% of all cases and recirculating system is used in another 50% of all cases.

## Reference product
- benzal chloride: 1 kg; By-product classification allocatable product; CPC 34170: Ethers, alcohol peroxides, ether peroxides, epoxides, acetals and hemiacetals, and their halogenated, sulphona[…]
  production volume 1.32237 kg
  properties: carbon allocation 0.525 kg, carbon content 0.525, carbon content, fossil 0.525, carbon content, non-fossil 0, dry mass 1 kg, heating value, net 20.34 MJ, price 0.73577 EUR2005, water content 0, water in wet mass 0 kg, wet mass 1 kg

## Inputs from technosphere
- chemical factory, organics: 4e-10 unit; lognormal variance with pedigree 0.448, pedigree (4,5,5,5,5)
- chlorine, liquid: 0.92105 kg; lognormal variance with pedigree 0.036, pedigree (4,5,5,1,1)
  properties: dry mass 1 kg, wet mass 1 kg
- electricity, medium voltage: 0.238919 kWh; lognormal variance with pedigree 0.0026, pedigree (1,3,5,5,1)
- heat, district or industrial, natural gas: 3.4067 MJ; lognormal variance with pedigree 0.0026, pedigree (1,3,5,5,1)
  properties: heating value, net 1 MJ
- heat, district or industrial, other than natural gas: 1.90148 MJ; lognormal variance with pedigree 0.0026, pedigree (1,3,5,5,1)
  properties: heating value, net 1 MJ
- toluene, liquid: 0.60526 kg; lognormal variance with pedigree 0.036, pedigree (4,5,5,1,1)
  properties: carbon content, fossil 0.913043, dry mass 1 kg, heating value, net 38.17 MJ, wet mass 1 kg

## Inputs from nature
- Water, cooling, unspecified natural origin [natural resource, in water]: 0.024 m3; lognormal variance with pedigree 0.198, pedigree (4,5,5,5,5)

## Emissions to nature
- Carbon dioxide, fossil [air, urban air close to ground]: 0.087537 kg; lognormal variance with pedigree 0.1786, pedigree (4,5,5,5,5)
- Chlorine [air, urban air close to ground]: 0.0018421 kg; lognormal variance with pedigree 0.188, pedigree (4,5,5,5,5)
- Toluene [air, urban air close to ground]: 0.0012105 kg; lognormal variance with pedigree 0.188, pedigree (4,5,5,5,5)
- Water [air, unspecified]: 0.0093 m3; lognormal variance with pedigree 0.0407, pedigree (2,2,5,1,1)
- BOD5, Biological Oxygen Demand [water, surface water]: 0.0087 kg; lognormal variance with pedigree 0.188, pedigree (4,5,5,5,5)
- COD, Chemical Oxygen Demand [water, surface water]: 0.0087 kg; lognormal variance with pedigree 0.188, pedigree (4,5,5,5,5)
- Chloride [water, surface water]: 0.48171 kg; lognormal variance with pedigree 0.448, pedigree (4,5,5,5,5)
- DOC, Dissolved Organic Carbon [water, surface water]: 0.0027 kg; lognormal variance with pedigree 0.188, pedigree (4,5,5,5,5)
- TOC, Total Organic Carbon [water, surface water]: 0.0027 kg; lognormal variance with pedigree 0.188, pedigree (4,5,5,5,5)
- Toluene [water, surface water]: 0.0029053 kg; lognormal variance with pedigree 0.448, pedigree (4,5,5,5,5)
- Water [water, unspecified]: 0.0147 m3; lognormal variance with pedigree 0.0407, pedigree (2,2,5,1,1)

## Sampling procedure
Literature data

## Review by Roland Hischier 2009-01-28
passed.
none

## Review by Roland Hischier 2011-09-22
Transfer of documentation done.
