# polystyrene production, general purpose

Dataset: EcoSpold 2, unit process
Geography: RoW
Time period: 2001-01-01 to 2022-12-31
Technology level: current
Classification: EcoSpold01Categories: plastics/polymers
Classification: ISIC rev.4 ecoinvent: 2013:Manufacture of plastics and synthetic rubber in primary forms
Tags: ConvertedDataset
Scenario: Business-as-Usual
System model: Substitution, consequential, long-term
Generated by: Roland Hischier
Published in: Hischier R. 2007
Database: ecoinvent
isCopyrightProtected: true
accessRestrictedTo: 1

## General comment
Data are derived from the Eco-profiles of the European plastics industry (PlasticsEurope). Not included are the values reported for: recyclable wastes, amount of air / N2 / O2 consumed, unspecified metal emission to air and to water, mercaptan emission to air, unspecified CFC/HCFC emission to air, dioxin to water. The amount of "sulphur (bonded)" is assumed to be included into the amount of raw oil.
[This dataset was already contained in the ecoinvent database version 2. It was not individually updated during the transfer to ecoinvent version 3. Life Cycle Impact Assessment results may still have changed, as they are affected by changes in the supply chain, i.e. in other datasets. This dataset was generated following the ecoinvent quality guidelines for version 2. It may have been subject to central changes described in the ecoinvent version 3 change report (http://www.ecoinvent.org/database/ecoinvent-version-3/reports-of-changes/), and the results of the central updates were reviewed extensively. The changes added e.g. consistent water flows and other information throughout the database. The documentation of this dataset can be found in the ecoinvent reports of version 2, which are still available via the ecoinvent website. The change report linked above covers all central changes that were made during the conversion process.]

## Included activities end
Aggregated data for all processes from raw material extraction until delivery at plant

## Geography
20 European production sites

## Technology
polymerization out of ethylene and benzene by free radical processes

## Time period
time to which data refer

## Parameters
- fraction, cooling water, cooling pond system, to air: 0.032 dimensionless; name fraction_CW_CP_to_air; lognormal variance with pedigree 0.0413, pedigree (2,3,1,3,1)
  Calculated based on literature value (Scown, C.D., 2011, Water Footprint of U.S. Transportation Fuels and supplying information of the article) (Vionnet, S., Quantis Water Database - Technical Report, 2012).
- fraction, cooling water, once-through system, to air: 0.004 dimensionless; name fraction_CW_OT_to_air; lognormal variance with pedigree 0.0413, pedigree (2,3,1,3,1)
  (same comment as for fraction, cooling water, cooling pond system, to air)
- fraction, cooling water, recirculating system, to air: 0.771 dimensionless; name fraction_CW_R_to_air; lognormal variance with pedigree 0.0413, pedigree (2,3,1,3,1)
  (same comment as for fraction, cooling water, cooling pond system, to air)
- fraction, cooling water, to air: 0.3875 dimensionless; name fraction_CW_to_air; = (0.5*fraction_CW_OT_to_air)+(0.5*fraction_CW_R_to_air); lognormal variance with pedigree 0.092025, pedigree (4,4,3,2,4)
  Calculated value based on literature value (see comments of the other parametres present in this dataset) and expert opinion. In the case when no industry/literature data are available about the type of cooling or directly fraction, cooling water, to air specific for the process a default assumption is applied. It is assumed that the once-through cooling system is used in 50% of all cases and recirculating system is used in another 50% of all cases.
- fraction, process water, to air: 0.205 dimensionless; lognormal variance with pedigree 0.092025, pedigree (4,4,3,2,4)

## Reference product
- polystyrene, general purpose: 1 kg; By-product classification allocatable product; CPC 34720: Polymers of styrene, in primary forms
  production volume 6.237e9 kg
  properties: carbon allocation 0.923077 kg, carbon content 0.923077, carbon content, fossil 0.923077, carbon content, non-fossil 0, dry mass 1 kg, heating value, net 38.67 MJ, price 1.29 EUR2005, water content 0, water in wet mass 0 kg, wet mass 1 kg

## Inputs from technosphere
- average incineration residue: -0.01287 kg
  properties: carbon content, fossil 0.0325466, carbon content, non-fossil 0.0511208, dry mass 1 kg, wet mass 1 kg
- coal slurry: -0.0076097 kg
  properties: carbon content, fossil 0.124, dry mass 1 kg, wet mass 1 kg
- decommissioned chemical production facilities: -7.6023e-5 kg
  properties: carbon content, fossil 0.0169382, carbon content, non-fossil 5.78006e-6, dry mass 1 kg, wet mass 1 kg
- hazardous waste, for incineration: -0.006993 kg
  properties: carbon content, fossil 0.554667, dry mass 0.75 kg, heating value, net 17 MJ, water content 0.333333, wet mass 1 kg
- municipal solid waste: -0.0283135, -4.00338e-5, -1.00875e-5, -1.44156e-5 kg (4 suppliers, which the file names only by identifier); sum of these -0.028378 kg
  properties: carbon content, fossil 0.171549, carbon content, non-fossil 0.261655, dry mass 0.771 kg, heating value, net 11.74 MJ, water content 0.297017, wet mass 1 kg
- spoil from hard coal mining: -0.046955 kg
  properties: carbon content, fossil 0.007879, dry mass 1 kg, wet mass 1 kg
- waste plastic, mixture: -8.74705e-6, -6.12342e-5, -2.29228e-7, -2.41396e-7, -4.42005e-8, -5.84444e-7, -9.75213e-8 kg (7 suppliers, which the file names only by identifier); sum of these -7.1178e-5 kg
  properties: carbon content, fossil 0.747344, dry mass 0.847 kg, heating value, net 30.79 MJ, water content 0.180638, wet mass 1 kg
- waste wood, untreated: -9.37922e-9, -1.78019e-7, -2.36177e-6, -2.21038e-8, -1.48278e-8, -6.20828e-8, -1.61603e-9 kg (7 suppliers, which the file names only by identifier); sum of these -2.6498e-6 kg
  properties: carbon content, non-fossil 0.48632, dry mass 0.8 kg, heating value, net 13.99 MJ, water content 0.25, wet mass 1 kg

## Inputs from nature
- Aluminium [natural resource, in ground]: 0.00015406 kg
- Anhydrite [natural resource, in ground]: 8.8813e-6 kg
- Barium [natural resource, in ground]: 1.7851e-6 kg
- Calcite [natural resource, in ground]: 0.0006395 kg
- Chromium [natural resource, in ground]: 2.1667e-8 kg
- Clay, bentonite [natural resource, in ground]: 8.8045e-5 kg
- Clay, unspecified [natural resource, in ground]: 1.0696e-7 kg
- Coal, brown [natural resource, in ground]: 4.1089e-5 kg
- Coal, hard, unspecified [natural resource, in ground]: 0.15373 kg
- Copper [natural resource, in ground]: 0.00017535 kg
- Dolomite [natural resource, in ground]: 1.9272e-5 kg
- Energy, gross calorific value, in biomass [natural resource, biotic]: 0.14955 MJ
- Energy, potential (in hydropower reservoir), converted [natural resource, in water]: 0.17343 MJ
- Feldspar [natural resource, in ground]: 2.5015e-16 kg
- Fluorspar [natural resource, in ground]: 1.2545e-5 kg
- Gas, natural [natural resource, in ground]: 0.89589 Sm3
- Granite [natural resource, in ground]: 5.4183e-13 kg
- Gravel [natural resource, in ground]: 5.8133e-6 kg
- Iron [natural resource, in ground]: 0.0015757 kg
- Lead [natural resource, in ground]: 9.9156e-6 kg
- Magnesite [natural resource, in ground]: 8.7643e-10 kg
- Manganese [natural resource, in ground]: 2.0328e-6 kg
- Mercury [natural resource, in ground]: 7.1365e-9 kg
- Nickel [natural resource, in ground]: 1.42e-5 kg
- Oil, crude [natural resource, in ground]: 1.0239 kg
- Olivine [natural resource, in ground]: 1.4783e-5 kg
- Peat [natural resource, biotic]: 0.00011831 kg
- Phosphorus [natural resource, in ground]: 1.8911e-11 kg
- Sand, unspecified [natural resource, in ground]: 0.00035239 kg
- Shale [natural resource, in ground]: 2.5144e-5 kg
- Sodium chloride [natural resource, in ground]: 0.0019512 kg
- Sodium nitrate [natural resource, in ground]: 2.6293e-9 kg
- Sulfur [natural resource, in ground]: 0.00014572 kg
- Sylvite [natural resource, in ground]: 5.3378e-6 kg
- Talc [natural resource, in ground]: 9.4393e-32 kg
- Titanium [natural resource, in ground]: 7.3489e-31 kg
- Uranium [natural resource, in ground]: 5.8843e-6 kg
- Water, cooling, unspecified natural origin [natural resource, in water]: 0.13138 m3; lognormal variance with pedigree 1.21, pedigree (5,5,5,5,5)
- Water, river [natural resource, in water]: 0.0060317 m3; lognormal variance with pedigree 1.21, pedigree (5,5,5,5,5)
- Water, salt, ocean [natural resource, in water]: 0.00052413 m3; lognormal variance with pedigree 1.21, pedigree (5,5,5,5,5)
- Water, unspecified natural origin [natural resource, in water]: 0.002619 m3; lognormal variance with pedigree 1.21, pedigree (5,5,5,5,5)
- Water, well, in ground [natural resource, in water]: 4.8797e-9 m3; lognormal variance with pedigree 1.21, pedigree (5,5,5,5,5)
- Wood, unspecified, standing [natural resource, biotic]: 7.4542e-8 m3
- Zinc [natural resource, in ground]: 9.2216e-5 kg

## Emissions to nature
- Aldehydes, unspecified [air, urban air close to ground]: 1.2659e-13 kg
- Ammonia [air, urban air close to ground]: 8.9085e-9 kg
- Antimony ion [air, urban air close to ground]: 1.296e-10 kg
- Arsenic ion [air, urban air close to ground]: 9.502e-9 kg
- Benzene [air, urban air close to ground]: 2.2648e-5 kg
- Benzene, ethyl- [air, urban air close to ground]: 4.0283e-5 kg
- Cadmium II [air, urban air close to ground]: 1.1807e-9 kg
- Carbon dioxide, fossil [air, urban air close to ground]: 2.7094 kg
- Carbon dioxide, non-fossil [air, urban air close to ground]: 0.0036237 kg
- Carbon disulfide [air, urban air close to ground]: 3.9359e-9 kg
- Carbon monoxide, fossil [air, urban air close to ground]: 0.005596 kg
- Carbon monoxide, non-fossil [air, urban air close to ground]: 7.4844e-6 kg
- Chlorine [air, urban air close to ground]: 9.0476e-7 kg
- Chloroethylene [air, urban air close to ground]: 1.0184e-8 kg
- Chromium III [air, urban air close to ground]: 1.5811e-6 kg
- Copper ion [air, urban air close to ground]: 7.9039e-8 kg
- Cyanide [air, urban air close to ground]: 1.9877e-18 kg
- Dinitrogen monoxide [air, urban air close to ground]: 1.929e-8 kg
- Dioxins, measured as 2,3,7,8-tetrachlorodibenzo-p-dioxin [air, urban air close to ground]: 8.5437e-41 kg
- Ethane, 1,2-dichloro- [air, urban air close to ground]: 3.0019e-9 kg
- Ethylene [air, urban air close to ground]: 6.8472e-6 kg
- Fluorine [air, urban air close to ground]: 4.2584e-8 kg
- Hydrocarbons, aliphatic, alkanes, cyclic [air, urban air close to ground]: 2.8739e-6 kg
- Hydrocarbons, aromatic [air, urban air close to ground]: 3.129e-5 kg
- Hydrocarbons, chlorinated [air, urban air close to ground]: 4.8722e-7 kg
- Hydrochloric acid [air, urban air close to ground]: 5.056e-5 kg
- Hydrogen [air, urban air close to ground]: 5.2074e-5 kg
- Hydrogen fluoride [air, urban air close to ground]: 1.8862e-6 kg
- Hydrogen sulfide [air, urban air close to ground]: 5.2989e-8 kg
- Lead II [air, urban air close to ground]: 2.5816e-7 kg
- Mercury II [air, urban air close to ground]: 1.8343e-9 kg
- Methane, chlorodifluoro-, HCFC-22 [air, urban air close to ground]: 1.4912e-8 kg
- Methane, dichloro-, HCC-30 [air, urban air close to ground]: 2.5812e-9 kg
- Methane, fossil [air, urban air close to ground]: 0.030355 kg
- Methane, non-fossil [air, urban air close to ground]: 4.0597e-5 kg
- NMVOC, non-methane volatile organic compounds [air, urban air close to ground]: 0.0029988 kg
- Nickel II [air, urban air close to ground]: 2.8741e-6 kg
- Nitrogen oxides [air, urban air close to ground]: 0.0053206 kg
- Particulate Matter, < 2.5 um [air, urban air close to ground]: 0.00022537 kg
- Particulate Matter, > 10 um [air, urban air close to ground]: 0.00028848 kg
- Particulate Matter, > 2.5 um and < 10um [air, urban air close to ground]: 0.00038764 kg
- Propene [air, urban air close to ground]: 5.0713e-6 kg
- Selenium IV [air, urban air close to ground]: 3.287e-11 kg
- Silver I [air, urban air close to ground]: 9.4906e-10 kg
- Styrene [air, urban air close to ground]: 7.4503e-5 kg
- Sulfate [air, urban air close to ground]: 5.7213e-15 kg
- Sulfur dioxide [air, urban air close to ground]: 0.0073194 kg
- Toluene [air, urban air close to ground]: 4.2534e-6 kg
- Water [air, unspecified]: 0.0527906 m3; lognormal variance with pedigree 0.0427, pedigree (2,2,5,5,1)
- Xylene [air, urban air close to ground]: 1.0475e-6 kg
- Zinc II [air, urban air close to ground]: 3.7457e-8 kg
- AOX, Adsorbable Organic Halogen [water, surface water]: 3.3597e-11 kg
- Acidity, unspecified [water, surface water]: 5.3775e-6 kg
- Aluminium III [water, surface water]: 1.0518e-6 kg
- Ammonium [water, surface water]: 1.2796e-5 kg
- Arsenic ion [water, surface water]: 8.365e-10 kg
- BOD5, Biological Oxygen Demand [water, surface water]: 4.8539e-5 kg
- Benzene [water, surface water]: 1.0261e-6 kg
- Bromate [water, surface water]: 2.7701e-9 kg
- COD, Chemical Oxygen Demand [water, surface water]: 0.00038453 kg
- Cadmium II [water, surface water]: 9.7632e-11 kg
- Calcium II [water, surface water]: 1.262e-5 kg
- Carbonate [water, surface water]: 0.0001157 kg
- Chlorate [water, surface water]: 4.8125e-7 kg
- Chloride [water, surface water]: 0.00034379 kg
- Chlorinated solvents, unspecified [water, surface water]: 2.4138e-8 kg
- Chlorine [water, surface water]: 1.7754e-8 kg
- Chloroethylene [water, surface water]: 1.9002e-10 kg
- Chromium III [water, surface water]: 1.6234e-11 kg
- Copper ion [water, surface water]: 1.7397e-6 kg
- Cyanide [water, surface water]: 1.4965e-10 kg
- DOC, Dissolved Organic Carbon [water, surface water]: 4.1934e-5 kg
- Dissolved solids [water, surface water]: 0.00021304 kg
- Ethane, 1,2-dichloro- [water, surface water]: 4.6755e-11 kg
- Fluoride [water, surface water]: 3.3714e-7 kg
- Hydrocarbons, unspecified [water, surface water]: 2.4551e-5 kg
- Iron ion [water, surface water]: 1.5727e-7 kg
- Lead II [water, surface water]: 3.1571e-9 kg
- Magnesium [water, surface water]: 1.6322e-7 kg
- Manganese II [water, surface water]: 1.0381e-9 kg
- Mercury II [water, surface water]: 1.9277e-10 kg
- Molybdenum VI [water, surface water]: 2.131e-8 kg
- Nickel II [water, surface water]: 1.5497e-6 kg
- Nitrate [water, surface water]: 6.9869e-6 kg
- Nitrogen [water, surface water]: 3.511e-6 kg
- Oils, unspecified [water, surface water]: 2.4126e-5 kg
- Phenol [water, surface water]: 4.9777e-7 kg
- Phosphorus [water, surface water]: 1.4796e-6 kg
- Potassium I [water, surface water]: 3.2552e-7 kg
- Silicon [water, surface water]: 1.2448e-19 kg
- Sodium I [water, surface water]: 0.00021035 kg
- Strontium [water, surface water]: 3.9513e-11 kg
- Sulfate [water, surface water]: 0.00040371 kg
- Sulfide [water, surface water]: 1.6941e-7 kg
- Sulfite [water, surface water]: 1.2211e-6 kg
- Suspended solids, unspecified [water, surface water]: 0.00027214 kg
- TOC, Total Organic Carbon [water, surface water]: 4.1934e-5 kg
- Tin ion [water, surface water]: 1.2954e-12 kg
- Water [water, unspecified]: 0.0877642 m3; lognormal variance with pedigree 0.0427, pedigree (2,2,5,5,1)
- Zinc II [water, surface water]: 4.9402e-8 kg

## Sampling procedure
literature values based on company survey

## Extrapolations
no extrapolations This dataset has been copied from an original dataset covering the geography RER. The uncertainty has been adjusted accordingly.

## Review by Jürgen Sutter 2010-04-06
passed.
