# rape oil mill operation

Dataset: EcoSpold 2, unit process
Geography: RoW
Time period: 1996-01-01 to 2022-12-31
Technology level: current
Classification: EcoSpold01Categories: biomass/fuels
Classification: ISIC rev.4 ecoinvent: 1040:Manufacture of vegetable and animal oils and fats
Tags: ConvertedDataset
Scenario: Business-as-Usual
System model: Substitution, consequential, long-term
Share of production covered: 0 %
Generated by: Edgard Gnansounou
Published in: Jungbluth N. 2007
Database: ecoinvent
isCopyrightProtected: true
accessRestrictedTo: 1

## General comment
Inventory refers to the production of 1 kg rape oil, respectively rape meal. The multioutput-process 'rape seeds, in oil mill' delivers the co-products 'rape oil, at oil mill' and 'rape meal, at oil mill'. Economic allocation with allocation factor of 74.3% to rape oil. Allocation is done according to carbon balance for CO2 emissions.
[This dataset was already contained in the ecoinvent database version 2. It was not individually updated during the transfer to ecoinvent version 3. Life Cycle Impact Assessment results may still have changed, as they are affected by changes in the supply chain, i.e. in other datasets. This dataset was generated following the ecoinvent quality guidelines for version 2. It may have been subject to central changes described in the ecoinvent version 3 change report (http://www.ecoinvent.org/database/ecoinvent-version-3/reports-of-changes/), and the results of the central updates were reviewed extensively. The changes added e.g. consistent water flows and other information throughout the database. The documentation of this dataset can be found in the ecoinvent reports of version 2, which are still available via the ecoinvent website. The change report linked above covers all central changes that were made during the conversion process.]

## Included activities end
This process includes the transport of rape seeds to the mill, and the processing of the seeds to rape oil and rape meal. The oil extraction refers to the solvent extraction technique. System boundary is at the oil mill.

## Geography
Data from different plants worldwide, mostly in Europe (incl. literature data)

## Technology
Typical oil mill designed for rape oil solvent extraction, with pre-pressing of rape seeds, European context.

## Time period
Data from 1996 to 2003, current technology in the EU

## Parameters
- fraction, cooling water, cooling pond system, to air: 0.032 dimensionless; name fraction_CW_CP_to_air; lognormal variance with pedigree 0.0413, pedigree (2,3,1,3,1)
  Calculated based on literature value (Scown, C.D., 2011, Water Footprint of U.S. Transportation Fuels and supplying information of the article) (Vionnet, S., Quantis Water Database - Technical Report, 2012).
- fraction, cooling water, once-through system, to air: 0.004 dimensionless; name fraction_CW_OT_to_air; lognormal variance with pedigree 0.0413, pedigree (2,3,1,3,1)
  (same comment as for fraction, cooling water, cooling pond system, to air)
- fraction, cooling water, recirculating system, to air: 0.771 dimensionless; name fraction_CW_R_to_air; lognormal variance with pedigree 0.0413, pedigree (2,3,1,3,1)
  (same comment as for fraction, cooling water, cooling pond system, to air)
- fraction, cooling water, to air: 0.3875 dimensionless; name fraction_CW_to_air; = (0.5*fraction_CW_OT_to_air)+(0.5*fraction_CW_R_to_air); lognormal variance with pedigree 0.092025, pedigree (4,4,3,2,4)
  Calculated value based on literature value (see comments of the other parametres present in this dataset) and expert opinion. In the case when no industry/literature data are available about the type of cooling or directly fraction, cooling water, to air specific for the process a default assumption is applied. It is assumed that the once-through cooling system is used in 50% of all cases and recirculating system is used in another 50% of all cases.
- fraction, process water, to air: 0.436296 dimensionless; lognormal variance with pedigree 0.092025, pedigree (4,4,3,2,4)

## Reference product
- rape oil, crude: 1 kg; By-product classification allocatable product; CPC 21641: Rape, colza and mustard oil, crude
  production volume 1.67208e10 kg
  properties: carbon allocation 0.776 kg, carbon content 0.776, carbon content, fossil 0, carbon content, non-fossil 0.776, dry mass 1 kg, heating value, net 23.51 MJ, price 0.538 EUR2005, water content 0, water in wet mass 0 kg, wet mass 1 kg

## Inputs from technosphere
- activated bentonite: 0.00103978 kg; lognormal variance with pedigree 0.0032, pedigree (2,3,5,5,1)
  properties: dry mass 1 kg, wet mass 1 kg
- electricity, medium voltage: 0.0146302, 0.000547392, 0.0069548, 0.120709, 0.0101357, 0.000543265 kWh (6 suppliers, which the file names only by identifier); sum of these 0.15352 kWh; lognormal variance with pedigree 0.0026, pedigree (2,1,5,5,1)
- heat, district or industrial, natural gas: 0.041379, 0.272702 MJ (2 suppliers, which the file names only by identifier); sum of these 0.314081 MJ; lognormal variance with pedigree 0.0026, pedigree (2,1,5,5,1)
  properties: heating value, net 1 MJ
- hexane: 0.000487069 kg; lognormal variance with pedigree 0.0027, pedigree (2,2,5,5,1)
  properties: carbon content, fossil 0.837209, dry mass 1 kg, heating value, net 45.02 MJ, wet mass 1 kg
- oil mill: 8.72733e-10 unit; lognormal variance with pedigree 0.384, pedigree (1,4,5,5,4)
- phosphoric acid, industrial grade, without water, in 85% solution state: 0.000934051 kg; lognormal variance with pedigree 0.0027, pedigree (2,2,5,5,1)
  properties: dry mass 1 kg, wet mass 1 kg
- rape meal: -1.61822 kg
  properties: carbon content, non-fossil 0.457233, dry mass 0.9 kg, price 0.127 EUR2005, water content 0.111111, wet mass 1 kg
- rape seed: 0.443799 kg; lognormal variance with pedigree 0.002, pedigree (1,1,5,5,1)
  properties: carbon content, non-fossil 0.574, dry mass 0.94 kg, water content 0.0638298, wet mass 1 kg
- rape seed, Swiss integrated production: 2.15268 kg; lognormal variance with pedigree 0.002, pedigree (1,1,5,5,1)
  properties: carbon content, non-fossil 0.574, dry mass 0.94 kg, water content 0.0638298, wet mass 1 kg
- rape seed, organic: 0.0217443 kg; lognormal variance with pedigree 0.002, pedigree (1,1,5,5,1)
  properties: carbon content, non-fossil 0.574, dry mass 0.94 kg, water content 0.0638298, wet mass 1 kg
- wastewater, average: -1.19299e-6, -4.24749e-9 m3 (2 suppliers, which the file names only by identifier); sum of these -1.19724e-6 m3; lognormal variance with pedigree 0.09, pedigree (5,5,1,5,1)
  properties: carbon content, non-fossil 0.194039, dry mass 0.346837 kg, mass concentration, TOC 0.1091 kg/m3, mass concentration, calcium 0.039453 kg/m3, mass concentration, chlorine 0.030031 kg/m3, mass concentration, hydrogen 0.013365 kg/m3, mass concentration, nitrogen 0.031015 kg/m3, mass concentration, oxygen 0.069824 kg/m3, mass concentration, sodium 0.06456 kg/m3, mass concentration, sulfur 0.015602 kg/m3, water content 2882.2, wet mass 1000 kg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

## Inputs from nature
- Carbon dioxide, in air [natural resource, in air]: 2.38002 kg; lognormal variance with pedigree 0.002, pedigree (1,1,5,5,1)
- Water, cooling, unspecified natural origin [natural resource, in water]: 6.98102e-5 m3; lognormal variance with pedigree 0.0148, pedigree (2,4,5,5,1)
- Water, unspecified natural origin [natural resource, in water]: 1.74525e-5 m3; lognormal variance with pedigree 0.0148, pedigree (3,3,5,5,1)

## Emissions to nature
- Carbon dioxide, non-fossil [air, urban air close to ground]: 2.39836 kg; lognormal variance with pedigree 0.002, pedigree (1,1,5,5,1)
- Hexane [air, urban air close to ground]: 0.000487069 kg; lognormal variance with pedigree 0.042, pedigree (1,1,5,5,1)
- Water [air, unspecified]: 3.46659e-5 m3; lognormal variance with pedigree 0.0427, pedigree (2,2,5,5,1)
- Water [water, unspecified]: 5.25968e-5 m3; lognormal variance with pedigree 0.0427, pedigree (2,2,5,5,1)

## Sampling procedure
Cross-checking of various literature sources from 1998 to 2006

## Extrapolations
none This dataset has been copied from an original dataset covering the geography Europe without Switzerland. The uncertainty has been adjusted accordingly.

## Review by Niels Jungbluth 2006-08-15
Passed.
none
