# tomato seedling production, in unheated greenhouse, for planting

Dataset: EcoSpold 2, unit process
Geography: RoW
Time period: 2009-01-01 to 2022-12-31
Technology level: current
Classification: ISIC rev.4 ecoinvent: 0130:Plant propagation
Tags: WFLDB
Scenario: Business-as-Usual
System model: Substitution, consequential, long-term
Generated by: [System]
Database: ecoinvent
isCopyrightProtected: true
accessRestrictedTo: 1

## General comment
This dataset is a weighted average of the regional datasets, with weights based on production volume of the reference product. Detailed comments and sources about the exchanges can be found in the regional datasets.
The geographicalCorrelation score of every pedigree matrix of was changed to '5'.
Sum of regional production volumes: 4.401e+9 unit
MX: PV = 2.661e+9 unit; weight = 0.6047
IT: PV = 1.018e+9 unit; weight = 0.2312
ES: PV = 7.221e+8 unit; weight = 0.1641
The comments below were part of the MX regional dataset.
This dataset represents the production of 1 tomato seedling, under non-heated greenhouse.
Functional unit is one tomato seedling at nursery.
34000 seedlings per ha.year are considered.

## Included activities start
This activity starts with the nursery producing seedlings

## Included activities end
Included processes: peat moss use, end-of-life and distribution to seedling farm, irrigation and greenhouse infrastructure.
Excluding: fertilizers and pesticides application and transport from the nursery to the farm where the seedlings will be planted.
This activity ends with seedlings exiting the nursery.

## Reference product
- tomato seedling, for planting: 1 unit; By-product classification allocatable product; CPC 01961: Live plants; bulbs, tubers and roots; cuttings and slips; mushroom spawn
  production volume 1.28641e10 unit
  properties: carbon allocation 0.254036 kg, carbon content 0.439481, carbon content, fossil 0, carbon content, non-fossil 0.439481, dry mass 0.578035 kg, price 0.00584717 EUR2005, water content 0.73, water in wet mass 0.421965 kg, wet mass 1 kg

## Inputs from technosphere
- greenhouse, plastic walls and roof: 1.13122e-6 m2*year
  properties: Surface 7 m2, lifetime 25 year
- irrigation: 0.000223371, 0.000805779, 2.49875e-5, 2.82006e-6, 1.06064e-6, 1.64961e-6, 9.91342e-5, 4.18427e-5, 5.80233e-6, 8.25117e-6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 m3 (16 suppliers, which the file names only by identifier); sum of these 0.00165709 m3
  properties: dry mass 0.11 kg, water content 9089.91, wet mass 1000 kg
- peat moss: 0.0003 m3
  properties: heating value, net 17.88 MJ

## Inputs from nature
- Occupation, arable land, unspecified use [natural resource, land]: 1.13122e-6 m2*year
- Transformation, from arable land, unspecified use [natural resource, land]: 1.13122e-6 m2
- Transformation, to arable land, unspecified use [natural resource, land]: 1.13122e-6 m2

## Emissions to nature
- Water [air, non-urban air or from high stacks]: 9.19913e-7 m3
- Water [water, ground-]: 0.000147434 m3
- Water [water, surface water]: 0.000589738 m3

## Sampling procedure
Data are based on the main production of strawberry seedlings in Mexico. Technology: Plastic greenhouses, non-heated
For the transport of seedlings to tomato farm, 100 g per seedling is considered, including moisture and container (Stoessel et al. 2012).

## Extrapolations
The amount of the exchanges are weighted average of regional datasets.

## Review by Assumpció ANTON 2016-06-09
Be aware that the use of statistics in input calculations could provide some specific inputs not common for specific crops, this should be corrected if better information is available.
Pesticides will need to be amended periodically checking for update of pesticides' ban.
