# seal production, natural rubber based

Dataset: EcoSpold 2, unit process
Geography: RoW
Time period: 1996-01-01 to 2022-12-31
Technology level: current
Classification: EcoSpold01Categories: plastics/others
Classification: ISIC rev.4 ecoinvent: 2029:Manufacture of other chemical products n.e.c.
Tags: ConvertedDataset
Scenario: Business-as-Usual
System model: Substitution, consequential, long-term
Generated by: Martin Lehmann
Published in: Kellenberger D. 2007
Database: ecoinvent
isCopyrightProtected: true
accessRestrictedTo: 1

## General comment
Caoutchouc is approximated by the dataset "Chemicals, organic". Included are white spirit and the required transportation by rail and road, and hydrocarbon emissions to air. This dataset does not include any energy consumption during the production phase.
[This dataset was already contained in the ecoinvent database version 2. It was not individually updated during the transfer to ecoinvent version 3. Life Cycle Impact Assessment results may still have changed, as they are affected by changes in the supply chain, i.e. in other datasets. This dataset was generated following the ecoinvent quality guidelines for version 2. It may have been subject to central changes described in the ecoinvent version 3 change report (http://www.ecoinvent.org/database/ecoinvent-version-3/reports-of-changes/), and the results of the central updates were reviewed extensively. The changes added e.g. consistent water flows and other information throughout the database. The documentation of this dataset can be found in the ecoinvent reports of version 2, which are still available via the ecoinvent website. The change report linked above covers all central changes that were made during the conversion process.]

## Included activities end
The dataset describes the production of a rubber-based sealing compound to be used e.g. in the aluminium cladding production.

## Geography
Data retrieved from a safety data sheet by a German producer. Applicable for Europe.

## Technology
Simple mass balance including transport. No process energy included.

## Reference product
- seal, natural rubber based: 1 kg; By-product classification allocatable product; CPC 35499: Other chemical products n.e.c.
  production volume 3.75794 kg
  properties: carbon allocation 0.881625 kg, carbon content 0.881625, carbon content, fossil 0, carbon content, non-fossil 0.881625, dry mass 1 kg, heating value, net 26.71 MJ, price 1.64472 EUR2005, water content 0, water in wet mass 0 kg, wet mass 1 kg

## Inputs from technosphere
- chemical factory, organics: 4e-10 unit; lognormal variance with pedigree 0.3146, pedigree (2,4,5,5,1)
- chemical, organic: 0.744 kg; lognormal variance with pedigree 0.0166, pedigree (2,4,5,5,1)
  properties: carbon content, fossil 0.628, dry mass 1 kg, heating value, net 19.03 MJ, wet mass 1 kg
- white spirit: 0.486 kg; lognormal variance with pedigree 0.0166, pedigree (2,4,5,5,1)
  properties: carbon content, fossil 0.863404, dry mass 1 kg, heating value, net 45 MJ, wet mass 1 kg

## Emissions to nature
- NMVOC, non-methane volatile organic compounds [air, unspecified]: 0.23 kg; lognormal variance with pedigree 0.1366, pedigree (2,4,5,5,1)

## Sampling procedure
Company information

## Extrapolations
see Geography This dataset has been copied from an original dataset covering the geography DE. The uncertainty has been adjusted accordingly.

## Review by Rolf Frischknecht 2007-11-07
passed
