# wafer factory construction

Dataset: EcoSpold 2, unit process
Geography: RoW
Time period: 2000-01-01 to 2022-12-31
Technology level: current
Classification: EcoSpold01Categories: photovoltaic/production of components
Classification: ISIC rev.4 ecoinvent: 4290:Construction of other civil engineering projects
Tags: ConvertedDataset
Scenario: Business-as-Usual
System model: Substitution, consequential, long-term
Share of production covered: 20 %
Generated by: Niels Jungbluth
Published in: Jungbluth, N. 2007
Database: ecoinvent
isCopyrightProtected: true
accessRestrictedTo: 1

## General comment
Plants of Wacker, DE in Wasserburg and Freiberg. Capacity of 1 million wafers per year. Life time assumed to be 25 years.
[This dataset was already contained in the ecoinvent database version 2. It was not individually updated during the transfer to ecoinvent version 3. Life Cycle Impact Assessment results may still have changed, as they are affected by changes in the supply chain, i.e. in other datasets. This dataset was generated following the ecoinvent quality guidelines for version 2. It may have been subject to central changes described in the ecoinvent version 3 change report (http://www.ecoinvent.org/database/ecoinvent-version-3/reports-of-changes/), and the results of the central updates were reviewed extensively. The changes added e.g. consistent water flows and other information throughout the database. The documentation of this dataset can be found in the ecoinvent reports of version 2, which are still available via the ecoinvent website. The change report linked above covers all central changes that were made during the conversion process.]

## Included activities end
Materials and land use for a new production plant.

## Geography
Two plants in DE and literature data.

## Technology
Wafer manufacturing plant for electronic and photovoltaics industry.

## Time period
Date of publication.

## Reference product
- wafer factory: 1 unit; By-product classification allocatable product; CPC 53269: Other constructions for manufacturing
  production volume 3.75794 unit
  properties: carbon allocation 0 kg, carbon content 0, price 50857.1 EUR2005

## Inputs from technosphere
- building, hall: 109.74 m2; lognormal variance with pedigree 0.3021, pedigree (1,2,5,5,1)
- metal working machine, unspecified: 10000 kg; lognormal variance with pedigree 0.5826, pedigree (5,3,5,5,5)
- water supply network: 0.021948 km; lognormal variance with pedigree 0.3021, pedigree (1,2,5,5,1)

## Inputs from nature
- Occupation, industrial area [natural resource, land]: 2743.5 m2*year; lognormal variance with pedigree 0.1221, pedigree (1,2,5,5,1)
- Transformation, from unspecified [natural resource, land]: 768.18 m2; lognormal variance with pedigree 0.1221, pedigree (1,2,5,5,1)
- Transformation, to industrial area [natural resource, land]: 438.96 m2; lognormal variance with pedigree 0.1221, pedigree (1,2,5,5,1)
- Transformation, to traffic area, road network [natural resource, land]: 329.22 m2; lognormal variance with pedigree 0.1221, pedigree (1,2,5,5,1)

## Sampling procedure
Environmental report

## Extrapolations
DE data used for Europe. This dataset has been copied from an original dataset covering the geography DE. The uncertainty has been adjusted accordingly.

## Review by Roberto Dones 2007-11-19
Passed.
none
