# bark chips production, hardwood, at sawmill

Dataset: EcoSpold 2, unit process
Geography: Europe without Switzerland
Time period: 2011-01-01 to 2022-12-31
Technology level: current
Classification: ISIC rev.4 ecoinvent: 1610:Sawmilling and planing of wood
Tags: Swiss brush-up completed
Scenario: Business-as-Usual
System model: Substitution, consequential, long-term
Share of production covered: 100 %
Generated by: Frank Werner
Published in: BFS 2013
Database: ecoinvent
isCopyrightProtected: true
accessRestrictedTo: 1

## General comment
This dataset represents the service of the handling of bark from hardwood at sawmill with an output of one kg of bark, measured in oven-dry mass of bark.
The process chain in a sawmill is a net of interlinked processes; the process structure depends on the individual design and technologies in place for each sawmill. The structuring of the sawmilling processes is based on the identification of the core processes in a sawmill that are attributable to several co-products (such as upstream processes like forestry and transport of logs to the sawmill) sorting, storing and the sawing of the (debarked) log. Other processes are attributable directly to one of the co-products such as the chipping of residual wood (either after sawing or as part of the profile chipping), the chipping of the bark (the 'debarking') or the suction of saw dust as collection and internal transport.
The following figure illustrates the general structure of the sawmilling processes before eventual drying and planing:

## Included activities start
Bark chips production starts with the bark taken off the stem as part of the over-all sawing process (see respective dataset) and includes all the handling of the bark in the sawmill.

## Included activities end
This activity ends with the bark chips stored in a silo at the saw mill. The dataset does not include dust emissions due to a high water content in the wood.

## Geography
Represents average Swiss conditions assumed to be represenative for Europe

## Reference product
- bark: -1 kg; By-product classification allocatable product; CPC 31230: Wood in chips or particles
  production volume 1.20603e9 kg
  properties: carbon allocation 0.494 kg, carbon content 0.494, carbon content, fossil 0, carbon content, non-fossil 0.494, dry mass 1 kg, heating value, net 7.37 MJ, price 0.034 EUR2005, water content 1.4, water in wet mass 1.4 kg, wet mass 2.4 kg

## Inputs from technosphere
- bark chips, wet, measured as dry mass: -1 kg; lognormal variance with pedigree 0.0262, pedigree (2,1,1,4,1)
  properties: carbon content, non-fossil 0.494, dry mass 1 kg, heating value, net 4.81 MJ, price 0.034 EUR2005, water content 1.4, wet mass 2.4 kg
- electricity, medium voltage: 0.0142 kWh; lognormal variance with pedigree 0.0262, pedigree (2,1,4,4,1)
  properties: UVEK_link_1 1779, UVEK_relative_amount_1 1

## Sampling procedure
complementary literature and sampling from sawmills
