# ground granulated blast furnace slag to generic market for supplementary cementitious materials

Dataset: EcoSpold 2, unit process
Geography: RoW
Time period: 2019-01-01 to 2022-12-31
Technology level: current
Classification: ISIC rev.4 ecoinvent: 2394:Manufacture of cement, lime and plaster
Scenario: Business-as-Usual
System model: Substitution, consequential, long-term
Generated by: Lucia Valsasina
Database: ecoinvent
isCopyrightProtected: true
accessRestrictedTo: 1

## General comment
This activity is a renaming activity, linking ground granulated blast furnace slag to the generic market for supplementary cementitious materials (SCM).

## Included activities start
The activity starts with the input of GGBFS.

## Included activities end
With the provision of a generic kg of supplementary cementitious materials.

## Reference product
- ground granulated blast furnace slag: 1 kg; By-product classification allocatable product; CPC 37440: Portland cement, aluminous cement, slag cement and similar hydraulic cements, except in the form of clinkers
  properties: carbon allocation 0 kg, carbon content 0, carbon content, fossil 0, carbon content, non-fossil 0, dry mass 1 kg, price 0 EUR2005, water content 0, water in wet mass 0 kg, wet mass 1 kg

## Inputs from technosphere
- supplementary cementitious materials: 0.000168723, 0.00271105, 0.99712 kg (3 suppliers, which the file names only by identifier); sum of these 1 kg
  properties: dry mass 1 kg, price 0.075 EUR2005, wet mass 1 kg
