# ceramic factory construction

Dataset: EcoSpold 2, unit process
Geography: CH
Time period: 2001-01-01 to 2022-12-31
Technology level: current
Classification: EcoSpold01Categories: construction materials/others
Classification: ISIC rev.4 ecoinvent: 4290:Construction of other civil engineering projects
Tags: ConvertedDataset
Scenario: Business-as-Usual
System model: Substitution, consequential, long-term
Generated by: Hans-Jörg Althaus
Published in: Kellenberger D. 2007
Database: ecoinvent
isCopyrightProtected: true
accessRestrictedTo: 1

## General comment
This dataset represents the construction of 1 ceramic plant. Data was based on a factory with a yearly output of 5.000 t of ceramic products, a life time of 50 years for buildings and of 25 years for machines is assumed.
This dataset represents the construction of 1 ceramic plant. Data was based on a factory with a yearly output of 5.000 t of ceramic products, a life time of 50 years for buildings and of 25 years for machines.

## Included activities start
From unoccupied land foreseen for a ceramic plant.

## Included activities end
This activity ends with the constructed buildings and machineries for a ceramic plant, as well as their disposal.

## Geography
Data was obtained from Austrian industries.

## Technology
The data of the infrastructure corresponds to a large scale production plant in Europe.

## Reference product
- ceramic factory: 1 unit; By-product classification allocatable product; CPC 53269: Other constructions for manufacturing
  production volume 0.0336675 unit
  properties: carbon allocation 0 kg, carbon content 0, price 7.077e6 EUR2005

## Inputs from technosphere
- building, hall: 29500 m2; lognormal variance with pedigree 0.3027, pedigree (3,3,5,3,1)
- building, multi-storey: 26300 m3; lognormal variance with pedigree 0.3027, pedigree (3,3,5,3,1)
- industrial machine, heavy, unspecified: 168000 kg; lognormal variance with pedigree 0.5, pedigree (5,5,5,5,5)

## Inputs from nature
- Occupation, industrial area [natural resource, land]: 3.44e6 m2*year; lognormal variance with pedigree 0.0427, pedigree (3,3,5,3,1)
- Occupation, traffic area, road network [natural resource, land]: 410000 m2*year; lognormal variance with pedigree 0.0427, pedigree (3,3,5,3,1)
- Transformation, from unspecified [natural resource, land]: 76900 m2; lognormal variance with pedigree 0.1207, pedigree (1,3,5,3,1)
- Transformation, to industrial area [natural resource, land]: 68700 m2; lognormal variance with pedigree 0.1227, pedigree (3,3,5,3,1)
- Transformation, to traffic area, road network [natural resource, land]: 8200 m2; lognormal variance with pedigree 0.1227, pedigree (3,3,5,3,1)

## Sampling procedure
Data was based on information from a major producer of sanitary ceramics in Europe. The source of the information is an environmental report of a company (ÖSPAG), that refers to the years 2000 and 2001 and to two Austrian factories.
A weighted mean value of the flows from the different years and factories is calculated. Detailed information on production waste is reported. This degree of detail is not available for input material. Thus some waste fractions without corresponding input are inventoried.

## Review by Roberto Dones 2003-07-04
Passed

## Review by Roland Hischier 2011-09-22
Transfer of documentation done.
