# electricity production, natural gas, combined cycle power plant

Dataset: EcoSpold 2, unit process
Geography: IN-GJ
Time period: 2000-01-01 to 2022-12-31
Technology level: modern
Classification: ISIC rev.4 ecoinvent: 3510:Electric power generation, transmission and distribution
Classification: EcoSpold01Categories: natural gas/power plants
Synonyms: CCGT; GCC; CCPP; GuD
Tags: natural gas power; fossil fuels; India
Scenario: Business-as-Usual
System model: Substitution, consequential, long-term
Generated by: Muhammed Noor Hossain
Published in: Hossain, Muhammed Noor 2016
Database: ecoinvent
isCopyrightProtected: true
accessRestrictedTo: 1

## General comment
This dataset represents the production of high voltage electricity in a combined cycle natural gas power plant without CHP (combined heat and power) in India - Gujarat (a state/union territory in India) in 2012. This dataset is created as a child of the global dataset, i.e. some of the values are inherited from the global dataset and some are country-specific. Following values are edited, because they are country specific: the annual production volume, input of fuel, thermal efficiency of the power plant, emissions of CO2, CO, CH4, NO2, SO2, and Particulates.
In a combined cycle power plant, a gas turbine is followed by a steam turbine. The dataset refers to a combined cycle power plant of 400MWe class with a gas turbine 260MWe and a steam turbine 140MWe.
For electricity production with natural gas, four different datasets relying to different power plant types exist:
- conventional power plant with / without CHP
- combined cycle power plant with / without CHP
At the moment, these datasets differ in nothing but the efficiency. High voltage electricity (at the busbar) is the reference product, whereupon heat is a by-product in CHP plants. Out of all fossile fuels, natural gas holds worldwide the highest share of CHP plants besides peat. Furthermore, natural gas power plants are today often designed with combined cycles. This dataset is for the natural gas, combined cycle power plant without CHP.The advantages of a combined cycle power plant are for example:
- a higher efficiency (approximately between 50-60% compared to ca. 33% for a conventional power plant
- high operating flexibility
- lower emissions due to higher efficiency
- lower cooling water need

The efficiency calculations are based on Central Electricity Authority (CEA) statistics (fuel input vs. electricity/heat produced) and own calculation assumptions. Reducing factors such as contaminations of important plant parts, cooling conditions or part load have been taken into account. Even if efficiencies vary with different surrounding temperatures, temperature adjustments would be related to high uncertainties.
Water is used for wet cooling and as feed water in the steam circuit. In this dataset, 100% wet cooling and no once-through cooling is assumed.
EMISSIONS:
Different sources served as basis for assumption of average emissions. Where possible, the most recent sources were taken into account, whereas older sources were taken in order to determine the remaining data gaps. The emissions of CO2, CO, CH4, NO2, SO2, and Particulates have been collected/calculated from India specific sources. The other emissions have been collected for the former UCTE region* and have been taken over as such for all countries (uncertainty adjusted accordingly). See ecoinvent report 'Erdgas' given as main source for details (Tab. 11.15). In the following a short overview:
Emissions of CO2 are mainly taken from CEA 2014. Emissions of NOx, CO, SO2, CH4, particles, and CH4 are mainly calculated as a product of input of fuel and corresponding emission factors. Please see the 'factor: input of MJ for the production' in 'parameters' tab for details.
NOx emissions are a major challenge in natural gas power plants. With rising temperature, emissions also rise; band widths of NOx emissions in literature are correspondingly large.
CO is a result of incomplete burning. For economic and technical reasons, plant combustion is optimized and CO emissions are low. CO2 and SO2 emissions are dependent on the composition of the used fuel. Due to the low sulfur content of the used natural gas, no desulfurization has to take place.

Organic compound emissions are estimated on the basis of EPA 1998.
Particles are assumed to be smaller than 2.5 micro-m
ormer UCTE: Union for the Coordination of the Transmission of Electricity, since 2009 replaced by ENTSO-E European Network of Transmission System Operators for Electricity
Sources:
CEA. (2014). CO2 Baseline Database for the Indian Power Sector. User Guide, Ministry of Power, Government of India, New Delhi. Retrieved 12 04, 2016, from http://cea.nic.in/reports/others/thermal/tpece/cdm_co2/user_guide_ver10.pdf
EPA 1998. US Environmental Protection Agency (1998). Compilation of Air Pollutant Emission Factors, AP-42, Fifth Edition, Volume I: Chapter 1: External Combustion Sources, Natural Gas Combustion - Final Section - Supplement D , July 1998. CHIEF (Clearinghouse for Inventories and Emission Factors). Research Triangle Park, North Carolina. http://www.epa.gov/ttn/chief/ap42/.
Rentz O., Karl U., Peter H. (2002). Ermittlung und Evaluierung von Emissionsfaktoren f\xfcr Feuerungsanlagen in Deutschland f\xfcr die Jahre 1995, 2000 und 2010. Deutsch- Franz\xf6sisches Institut f\xfcr Umweltforschung, Uni Karsruhe. Endbericht. Im Auftrag des Umweltbundesamtes. Forschungsbericht 299 43 142. Umweltbundesamt. Berlin.
[This dataset is meant to replace the following datasets:
- electricity production, natural gas, combined cycle power plant, IN, 2000 - 2015]

## Included activities start
From the constructed combined cycle natural gas power plant ready to produce electricity.

From reception of natural gas and operating materials at power plant/factory gate

## Included activities end
This activity ends with 1kWh of high voltage electricity produced at the power plant and arrived at the busbar.

This dataset includes:
- all operation and maintenance activities and materials of the power plants.
- Cooling: It is a assumed that all plants use wet cooling with a cooling tower. No cooling tower is included in this dataset (will be implemented in future versions)
- decarbonised water use for reduction of NOx emissions

This dataset doesn't include
- raw materials extraction, decommissioning and waste treatment as these activities are already included in the infrastructure datasets.
- transformation of the electricity produced.

## Technology
Combined cycle power plant of 400MWe class with a gas turbine 265MWe and a steam turbine 140MWe. The plant is used for middle load with 5000 hours of operation at full capacity per year. The plant is assumed to operate 180000 hours during its lifetime.

## Time period
The Annual Production Volume data for the period 01.04.2012 - 31.03.2013.

## Parameters
- efficiency: 0.464884 dimensionless; = 1*3.6/ factor_MJ_kWh; lognormal variance with pedigree 0.003325, pedigree (3,2,1,2,2)
  Calculated value. Efficiency is calculated as 1*3.6/input of fuel for the production of 1 kWh.
- factor: input of MJ for the production of 1 kWh: 7.74387 MJ/kWh; name factor_MJ_kWh; = natural_gas*natural_gas_Net_Heat_Value; lognormal variance with pedigree 0.003325, pedigree (3,2,1,2,2)
  Calculated value. Calculated as the product of fuel consumption and net calorific (heating) value of fuel. The fuel (natural gas) consumption is different across the Indian geographies. In this state/union territory, it is 0.23 m3/kWh. However, the net calorific (heating) value of natural gas is considered same for all the geographies becuase Indian Central Electricity Authority (CEA) provides only single national average value (33.14 MJ/m3) for that. Source: CEA. (2014). CO2 Baseline Database for the Indian Power Sector.
- fraction, cooling water, to air: 0.0159178 dimensionless; name fraction_CW_to_air; = (WConsumption_EP_NG_recirculatingCS*recirculating_CS_fraction_from_allCS+WConsumption_EP_NG_onceT_andCP_CS*once_through_andCP_CS_fractio_from_allCS)/(WWithdrawal_EP_NG_recirculating_CS*recirculating_CS_fraction_from_allCS+WWithdrawal_EP_NG_onceT_andCP_CS*once_through_andCP_CS_fractio_from_allCS); lognormal variance with pedigree 0.092025, pedigree (4,4,3,2,4)
  Calculated
  nan
- fraction, process water, to air: 0.15 dimensionless; name fraction_PW_to_air; lognormal variance with pedigree 0.092025, pedigree (4,4,3,2,4)
  Literature value. In case when no industry/process specific data are available, default evaporation fraction value is used. This value is 15% and is based on literature (Statistics Canada, 2007 & Shaffer, K.H., 2008, Consumptive water use in the Great Lakes Basin, USGS & Shiklomanov, 2003, World Water Resources at the Beginning of the 21st Century) and has been approved by an expert.
  nan
- fraction, water, completely softened, to air: 0.15 dimensionless; name fraction_WCS_to_air; = fraction_PW_to_air; lognormal variance with pedigree 0.092025, pedigree (4,4,3,2,4)
  Calculated value. See comment in the other parametres present in this dataset. Water, completely softened is considered to be always used as process water, thus process water fractions to air are applied to all water, completely softened input flows to calculate the amount of water consumed in the processes.
  nan
- fraction, water, decarbonised, to air: 0.0159178 dimensionless; name fraction_WDC_to_air; = fraction_CW_to_air; lognormal variance with pedigree 0.092025, pedigree (4,4,3,2,4)
  Calculated value. See comments in the other parametres present in this dataset. Decarbonised water is considered to be always used as cooling water, thus cooling water fractions to air are applied to all carbonised water input flows to calculate the amount of water consumed in the processes.
  nan
- gross electricity production: 1.27419e10 kWh; name gross_electricity; lognormal variance with pedigree 0.003325, pedigree (3,2,1,2,2)
  Literature and calculated value. Annual production volume data were extracted from the annual thermal electricity generation report of Central Electricity Authority, India (CEA, 2013). However, there were no specific data on the actual share of electricity production from natual gas, conventional power plant and natural gas, combined cycle power plant. Hence, we keep the existing share in ecoinvent v3 which is 18% for conventional power plant and 82% for combined cycle power plant. Also, the Annual Production Volume is for the time period of 01.04.2012 - 31.03.2013 since CEA documents annual electricity production data for the mentioned time period. CEA. (2013). Region Wise, State Wise, Sector Wise, Type Wise, Station Wise, Unit Wise Generation Report For 31-Mar-2013. Central Electricity Authority (CEA). Retrieved from 04 December, 2016 http://cea.nic.in/reports/daily/dgr/2013/March/31/dgr2.pdf
- losses from gross electricity production: 0.03 dimensionless; name losses_gross_net; lognormal variance with pedigree 0.003325, pedigree (3,2,1,2,2)
  Literature value. Own use of electricity plants in this State/Union Territory in 2012. The default loss as described by the CEA CO2 Baseline Database for the Indian Power Sector is applied, which is 3%. CEA. (2014). CO2 Baseline Database for the Indian Power Sector. User Guide, Ministry of Power, Government of India, New Delhi. Retrieved 12 04, 2016, from http://cea.nic.in/reports/others/thermal/tpece/cdm_co2/user_guide_ver10.pdf
- once-through and cooling pond cooling systems as a fraction of all cooling syste: 0.625 dimensionless; name once_through_andCP_CS_fractio_from_allCS; lognormal variance with pedigree 0.092025, pedigree (4,4,3,2,4)
  Calculated as an average of data available for Europe (Floerke, 2008, Future changes of freshwater needs in the electricity production sector) and USA (NERL, 2011, Estimating freshwater needs to meet future thermoelectric generation requirements).
  nan
- recirculating cooling system as a fraction of all cooling systems: 0.375 dimensionless; name recirculating_CS_fraction_from_allCS; lognormal variance with pedigree 0.092025, pedigree (4,4,3,2,4)
  (same comment as for once-through and cooling pond cooling systems as a fraction of all coo)
- water consumption, electricity production from NG, once-T and coolingP CS: 0.0018 m3/kWh; name WConsumption_EP_NG_recirculatingCS; lognormal variance with pedigree 0.092025, pedigree (4,4,3,2,4)
  Estimated based on literature (Scown, 2011, Water Footprint of U.S. Transportation Fuels, SI).
  nan
- water consumption, electricity production from NG, recirculating CS: 0.0005 m3/kWh; name WConsumption_EP_NG_onceT_andCP_CS; lognormal variance with pedigree 0.092025, pedigree (4,4,3,2,4)
  (same comment as for water consumption, electricity production from NG, once-T and coolingP)
- water withdrawal, electricity production from NG, once-T and coolingP CS: 0.0021 m3/kWh; name WWithdrawal_EP_NG_recirculating_CS; lognormal variance with pedigree 0.092025, pedigree (4,4,3,2,4)
  (same comment as for water consumption, electricity production from NG, once-T and coolingP)
- water withdrawal, electricity production from NG, recirculating CS: 0.098 m3/kWh; name WWithdrawal_EP_NG_onceT_andCP_CS; lognormal variance with pedigree 0.092025, pedigree (4,4,3,2,4)
  (same comment as for water consumption, electricity production from NG, once-T and coolingP)

## Reference product
- electricity, high voltage: 1 kWh; By-product classification allocatable product; CPC 17100: Electrical energy
  production volume 3.03368e10 kWh
  properties: carbon allocation 0 kg, carbon content 0, price 0.0977 EUR2005

## Inputs from technosphere
- gas power plant, combined cycle, 400MW electrical: 1.38889e-11 unit; lognormal variance with pedigree 0.1332, pedigree (3,3,5,4,3)
- natural gas, high pressure: 0.233671 m3; lognormal variance with pedigree 0.002725, pedigree (3,2,3,2,2)
  properties: carbon content, fossil 0.602381, dry mass 0.84 kg, heating value, net 33.14 MJ, wet mass 0.84 kg
- residue from cooling tower: -7.74387e-6 kg; lognormal variance with pedigree 1.0747, pedigree (4,3,4,3,3)
  properties: carbon content, fossil 0.0544233, dry mass 0.7 kg, water content 0.428571, wet mass 1 kg
- water, completely softened: 0.0464632 kg; lognormal variance with pedigree 0.228625, pedigree (4,3,5,2,3)
  properties: wet mass 1 kg
- water, decarbonised: 1.54877 kg; lognormal variance with pedigree 0.2292, pedigree (4,3,5,4,3)
  properties: wet mass 1 kg

## Inputs from nature
- Water, cooling, unspecified natural origin [natural resource, in water]: 0.0457533 m3; lognormal variance with pedigree 0.092025, pedigree (4,4,5,2,4)

## Emissions to nature
- Acenaphthene [air, non-urban air or from high stacks]: 6.14089e-12 kg; lognormal variance with pedigree 0.6487, pedigree (3,3,5,3,3)
- Acetaldehyde [air, non-urban air or from high stacks]: 6.19509e-9 kg; lognormal variance with pedigree 1.0747, pedigree (4,3,5,3,3)
- Acetic acid [air, non-urban air or from high stacks]: 9.37008e-7 kg; lognormal variance with pedigree 1.0687, pedigree (3,3,5,3,3)
- Arsenic ion [air, non-urban air or from high stacks]: 3.18273e-10 kg; lognormal variance with pedigree 0.06, pedigree (3,5,5,5,4)
- Benzene [air, non-urban air or from high stacks]: 6.98497e-9 kg; lognormal variance with pedigree 0.6487, pedigree (3,3,5,3,3)
- Benzo(a)pyrene [air, non-urban air or from high stacks]: 4.0965e-12 kg; lognormal variance with pedigree 0.6487, pedigree (3,3,5,3,3)
- Beryllium II [air, non-urban air or from high stacks]: 1.91273e-11 kg; lognormal variance with pedigree 0.06, pedigree (3,5,5,5,4)
- Butane [air, non-urban air or from high stacks]: 7.17082e-6 kg; lognormal variance with pedigree 0.6487, pedigree (3,3,5,3,3)
- Cadmium II [air, non-urban air or from high stacks]: 1.75011e-9 kg; lognormal variance with pedigree 0.06, pedigree (3,5,5,5,4)
- Carbon dioxide, fossil [air, non-urban air or from high stacks]: 0.418716 kg; lognormal variance with pedigree 0.0018, pedigree (2,1,3,1,2)
- Carbon monoxide, fossil [air, non-urban air or from high stacks]: 1.70365e-5 kg; lognormal variance with pedigree 0.2927, pedigree (3,2,3,2,2)
- Chromium III [air, non-urban air or from high stacks]: 2.22249e-9 kg; lognormal variance with pedigree 0.028, pedigree (3,5,5,5,3)
- Cobalt II [air, non-urban air or from high stacks]: 1.33194e-10 kg; lognormal variance with pedigree 0.06, pedigree (3,5,5,5,4)
- Dinitrogen monoxide [air, non-urban air or from high stacks]: 7.56576e-6 kg; lognormal variance with pedigree 0.3087, pedigree (3,3,5,3,3)
- Dioxins, measured as 2,3,7,8-tetrachlorodibenzo-p-dioxin [air, non-urban air or from high stacks]: 2.24572e-16 kg; lognormal variance with pedigree 1.0747, pedigree (4,3,5,3,3)
- Ethane [air, non-urban air or from high stacks]: 1.06091e-5 kg; lognormal variance with pedigree 0.6487, pedigree (3,3,5,3,3)
- Formaldehyde [air, non-urban air or from high stacks]: 2.50127e-7 kg; lognormal variance with pedigree 0.6487, pedigree (3,3,5,3,3)
- Hexane [air, non-urban air or from high stacks]: 6.14089e-6 kg; lognormal variance with pedigree 0.6487, pedigree (3,3,5,3,3)
- Lead II [air, non-urban air or from high stacks]: 7.97618e-10 kg; lognormal variance with pedigree 0.06, pedigree (3,5,5,5,4)
- Manganese II [air, non-urban air or from high stacks]: 6.04796e-10 kg; lognormal variance with pedigree 0.06, pedigree (3,5,5,5,4)
- Mercury II [air, non-urban air or from high stacks]: 5.32778e-10 kg; lognormal variance with pedigree 0.6487, pedigree (3,3,5,3,3)
- Methane, fossil [air, non-urban air or from high stacks]: 7.51929e-6 kg; lognormal variance with pedigree 0.2927, pedigree (3,2,3,2,2)
- Nickel II [air, non-urban air or from high stacks]: 3.33761e-9 kg; lognormal variance with pedigree 0.06, pedigree (3,5,5,5,4)
- Nitrogen oxides [air, non-urban air or from high stacks]: 0.000197469 kg; lognormal variance with pedigree 0.2927, pedigree (3,2,3,2,2)
- PAH, polycyclic aromatic hydrocarbons [air, non-urban air or from high stacks]: 6.19509e-8 kg; lognormal variance with pedigree 1.0747, pedigree (4,3,5,3,3)
- Particulate Matter, < 2.5 um [air, non-urban air or from high stacks]: 3.78618e-6 kg; lognormal variance with pedigree 0.3347, pedigree (3,3,5,3,4)
- Pentane [air, non-urban air or from high stacks]: 8.90545e-6 kg; lognormal variance with pedigree 0.6487, pedigree (3,3,5,3,3)
- Propane [air, non-urban air or from high stacks]: 5.45943e-6 kg; lognormal variance with pedigree 0.6487, pedigree (3,3,5,3,3)
- Propionic acid [air, non-urban air or from high stacks]: 1.23902e-7 kg; lognormal variance with pedigree 1.0747, pedigree (4,3,5,3,3)
- Selenium IV [air, non-urban air or from high stacks]: 3.80224e-11 kg; lognormal variance with pedigree 0.6487, pedigree (3,3,5,3,3)
- Sulfur dioxide [air, non-urban air or from high stacks]: 4.42949e-6 kg; lognormal variance with pedigree 0.2927, pedigree (3,2,3,2,2)
- Toluene [air, non-urban air or from high stacks]: 1.16158e-8 kg; lognormal variance with pedigree 0.6487, pedigree (3,3,5,3,3)
- Water [air, unspecified]: 0.000759915 m3; lognormal variance with pedigree 0.092025, pedigree (4,4,5,2,4)
- Water [water, unspecified]: 0.0465887 m3; lognormal variance with pedigree 0.092025, pedigree (4,4,5,2,4)

## Sampling procedure
The inventory is generated using statistical data, literature data and modelling.

## Extrapolations
All exchange data except the emissions of CO2, CO, CH4, NO2, SO2, and Particulates were extrapolated from datasets of the following 11 countries: AT, BE, DE, ES, FR, GB, IT, JP, LU, NL, US. The data of those countries basically rely on data of the former UCTE (see general comment).

The cooling and feed water use has been taken over from datasets for electricity production with hard coal or lignite.

## Review by Karin Treyer 2017-01-05
This dataset has been produced in a project on regionalisation of the Indian electricity mix on a states level.
In general, only key parameters have been adjusted to region-specific conditions, such as the electrical efficiency, specific emissions to air or power plants own use of electricity (losses from gross to net electricity). Whenever more accurate data will be available, these should be included in this dataset.
