# maize grain production, rainfed

Dataset: EcoSpold 2, unit process
Geography: RoW
Time period: 2006-01-01 to 2022-12-31
Technology level: current
Classification: ISIC rev.4 ecoinvent: 0111:Growing of cereals (except rice), leguminous crops and oil seeds
Synonyms: Zea mays L., corn
Scenario: Business-as-Usual
System model: Substitution, consequential, long-term
Generated by: Karen Muir
Published in: de Kock, L. 2017
Database: ecoinvent
isCopyrightProtected: true
accessRestrictedTo: 1

## General comment
This dataset represents the production of 1 kg of grain maize (fresh matter). The yield is 3770 kg/ha at a moisture content at storage of 13%.
Modelling is based on three different grain maize varieties, one GM-free and two GM varieties (Bazillus thuringiensis (GM-Bt) and Roundup Ready (GM-RR)), each accounting for the following proportion of total production:
GM-free:16.3%
GM-Bt: 59.8%
GM-RR: 24.0%
Mineral N-P2O5-K2O fertiliser input is 66-11-7 kg/ha. Organic fertilisers applied amount to 2.5 t/ha of solid manure. "

## Included activities start
This activity starts after the harvest of the previous crop.

## Included activities end
This activity ends with the transport of the harvested crop to the farm. The inputs of seeds, mineral fertilisers, and pesticides are considered. Manure is the only organic fertiliser applied. The dataset includes all machine operations: soil cultivation, sowing, fertilisation, weed control, pest and pathogen control, combine-harvesting, transport of the harvested maize from the field to farm (5 km). Direct field emissions are also included.

## Geography
The inventory is modelled based on data from South Africa.

## Technology
Cultivation of maize

## Parameters
- acetochlor: 0.000122678 kg; lognormal variance with pedigree 0.053, pedigree (3,5,1,5,3)
  Quantity of pesticide applied (kg/kg maize)
- alpha-cypermethrin: 3.72359e-6 kg; name alpha_cypermethrin; lognormal variance with pedigree 0.053, pedigree (3,5,1,5,3)
  Quantity of pesticide applied (kg/kg maize)
- ammonium sulfate: 0.00017938 kg; name ammonium_sulfate; lognormal variance with pedigree 0.0206, pedigree (3,5,1,5,3)
  Quantity of pesticide applied (kg/kg maize)
- azoxystrobin: 1.82768e-5 kg; lognormal variance with pedigree 0.053, pedigree (3,5,1,5,3)
  Quantity of pesticide applied (kg/kg maize)
- benfuracarb: 2.88225e-6 kg; lognormal variance with pedigree 0.053, pedigree (3,5,1,5,3)
  Quantity of pesticide applied (kg/kg maize)
- compost application: 8.85125e-5 ha; name compost_application; lognormal variance with pedigree 0.0206, pedigree (3,5,1,5,3)
  Application of compost (ha/kg maize)
- fenvalerate: 2.88225e-7 kg; lognormal variance with pedigree 0.053, pedigree (3,5,1,5,3)
  Quantity of pesticide applied (kg/kg maize)
- fertiliser application: 0.000973638 ha; name fertiliser_application; lognormal variance with pedigree 0.0206, pedigree (3,5,1,5,3)
  Application of fertiliser (ha/kg maize)
- glyphosate: 6.35879e-5 kg; lognormal variance with pedigree 0.053, pedigree (3,5,1,5,3)
  Quantity of pesticide applied (kg/kg maize)
- imidacloprid: 1.54897e-7 kg; lognormal variance with pedigree 0.053, pedigree (3,5,1,5,3)
  Quantity of pesticide applied (kg/kg maize)
- lambda-cyhalothrin: 7.8548e-7 kg; name Lambda_cyhalothrin; lognormal variance with pedigree 0.053, pedigree (3,5,1,5,3)
  Quantity of pesticide applied (kg/kg maize)
- mesotrione: 7.74384e-6 kg; lognormal variance with pedigree 0.053, pedigree (3,5,1,5,3)
  Quantity of pesticide applied (kg/kg maize)
- pesticides unspecified: 0.000351008 kg; name pesticides_unspecified; lognormal variance with pedigree 0.053, pedigree (3,5,1,5,3)
  Quantity of pesticide applied (kg/kg maize). This includes pesticides for which there is currently no specific exchange.
- round up: 7.06884e-5 kg; name round_up; lognormal variance with pedigree 0.053, pedigree (3,5,1,5,3)
  Quantity of pesticide applied (kg/kg maize)
- thiamethoxam: 1.98915e-5 kg; lognormal variance with pedigree 0.053, pedigree (3,5,1,5,3)
  Quantity of pesticide applied (kg/kg maize)

## Reference product
- maize grain: 1 kg; By-product classification allocatable product; CPC 01122: Maize (corn), other
  production volume 7.59175e11 kg
  properties: carbon allocation 0.40383 kg, carbon content 0.46957, carbon content, fossil 0, carbon content, non-fossil 0.46957, dry mass 0.86 kg, price 0.12 EUR2005, water content 0.162791, water in wet mass 0.14 kg, wet mass 1 kg

## Inputs from technosphere
- application of plant protection product, by field sprayer: 0.00194728 ha; lognormal variance with pedigree 0.136, pedigree (3,5,4,5,3)
- atrazine: 0.000149152 kg; lognormal variance with pedigree 0.0206, pedigree (3,5,4,5,3)
  properties: carbon content, fossil 0.446512, dry mass 1 kg, wet mass 1 kg
- combine harvesting: 0.000265538 ha; lognormal variance with pedigree 0.1356, pedigree (3,5,4,5,3)
- cyclic N-compound: 5.53203e-6 kg; lognormal variance with pedigree 0.02515, pedigree (3,5,4,5,3)
  properties: carbon content, fossil 0.641962, dry mass 1 kg, wet mass 1 kg
- fertilising, by broadcaster: 0.00106215 ha; lognormal variance with pedigree 0.1356, pedigree (3,5,4,5,3)
- glyphosate: 0.000134276 kg; lognormal variance with pedigree 0.0206, pedigree (3,5,4,5,3)
  properties: carbon content, fossil 0.214286, dry mass 1 kg, wet mass 1 kg
- inorganic nitrogen fertiliser, as N: 0.00146701, 5.79592e-7, 6.13416e-5, 1.45244e-5, 3.9741e-5, 3.96285e-5, 4.34261e-6, 0.000173246, 0.00111575, 3.7907e-5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 kg (29 suppliers, which the file names only by identifier); sum of these 0.0174521 kg; lognormal variance with pedigree 0.1356, pedigree (3,5,4,5,3)
  properties: dry mass 1 kg, wet mass 1 kg
- inorganic phosphorus fertiliser, as P2O5: 0.000110781, 2.09348e-5, 1.70941e-5, 2.09315e-7, 2.46128e-5, 8.04035e-7, 7.90745e-7, 3.58826e-5, 5.61496e-6, 0.000167804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 kg (29 suppliers, which the file names only by identifier); sum of these 0.00295882 kg; lognormal variance with pedigree 0.0206, pedigree (3,5,4,5,3)
  properties: dry mass 1 kg, wet mass 1 kg
- inorganic potassium fertiliser, as K2O: 9.6322e-8, 0.000132547, 0.000148361, 1.19718e-5, 0.000959018, 3.1837e-6, 7.04596e-5, 2.12922e-6, 9.1696e-5, 3.92132e-6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 kg (29 suppliers, which the file names only by identifier); sum of these 0.00184592 kg; lognormal variance with pedigree 0.0206, pedigree (3,5,4,5,3)
  properties: dry mass 1 kg, wet mass 1 kg
- lime: 0.21698, 0.0189947 kg (2 suppliers, which the file names only by identifier); sum of these 0.235974 kg; lognormal variance with pedigree 0.0206, pedigree (3,5,4,5,3)
  properties: carbon content, fossil 0.120005, dry mass 1 kg, wet mass 1 kg
- maize seed, for sowing: 0.00255968 kg; lognormal variance with pedigree 0.0206, pedigree (3,5,4,5,3)
  properties: carbon content, non-fossil 0.45263, dry mass 0.88 kg, water content 0.136364, wet mass 1 kg
- manure, solid, cattle: 0.663095 kg; lognormal variance with pedigree 0.0206, pedigree (3,5,4,5,3)
  properties: carbon content, non-fossil 0.441, dry mass 0.22 kg, water content 3.5454, wet mass 1 kg
- metolachlor: 0.000267204 kg; lognormal variance with pedigree 0.0206, pedigree (3,5,4,5,3)
  properties: carbon content, fossil 0.633803, dry mass 1 kg, wet mass 1 kg
- nitrile-compound: 1.51462e-5 kg; lognormal variance with pedigree 0.0206, pedigree (3,5,4,5,3)
  properties: carbon content, fossil 0.344995, dry mass 1 kg, wet mass 1 kg
- packaging, for fertilisers: 0.516463 kg; lognormal variance with pedigree 0.0512, pedigree (4,3,4,5,4)
  properties: carbon content, fossil 0.825301, dry mass 1 kg, heating value, net 25.01 MJ, price 0.0642 EUR2005, wet mass 1 kg
- packaging, for pesticides: 0.00207916 kg; lognormal variance with pedigree 0.0512, pedigree (4,3,4,5,4)
  properties: carbon content, fossil 0.85714, dry mass 1 kg, heating value, net 25.97 MJ, price 0.0642 EUR2005, wet mass 1 kg
- pesticide, unspecified: 0.000351008 kg; lognormal variance with pedigree 0.0206, pedigree (3,5,4,5,3)
  properties: carbon content, fossil 0.486978, dry mass 1 kg, wet mass 1 kg
- phenoxy-compound: 2.88225e-7 kg; lognormal variance with pedigree 0.0206, pedigree (3,5,4,5,3)
  properties: carbon content, fossil 0.532559, dry mass 1 kg, wet mass 1 kg
- pyrethroid-compound: 4.50907e-6 kg; lognormal variance with pedigree 0.0206, pedigree (3,5,4,5,3)
  properties: carbon content, fossil 0.623, dry mass 1 kg, wet mass 1 kg
- sowing: 0.000265538 ha; lognormal variance with pedigree 0.1356, pedigree (3,5,4,5,3)
- tillage, harrowing, by rotary harrow: 0.000531075 ha; lognormal variance with pedigree 0.32, pedigree (3,5,4,5,3)
- tillage, ploughing: 0.000265538 ha; lognormal variance with pedigree 0.1342, pedigree (2,5,4,5,3)
- transport, tractor and trailer, agricultural: 0.0448684, 0.000182456 metric ton*km (2 suppliers, which the file names only by identifier); sum of these 0.0450508 metric ton*km; lognormal variance with pedigree 0.1664, pedigree (3,5,4,5,3)
- triazine-compound, unspecified: 0.000112465 kg; lognormal variance with pedigree 0.0206, pedigree (3,5,4,5,3)
  properties: carbon content, fossil 0.475616, dry mass 1 kg, wet mass 1 kg

## Inputs from nature
- Carbon dioxide, in air [natural resource, in air]: 1.49687 kg; lognormal variance with pedigree 0.02515, pedigree (3,5,4,5,3)
- Energy, gross calorific value, in biomass [natural resource, biotic]: 15.91 MJ; lognormal variance with pedigree 0.02515, pedigree (3,5,4,5,3)
- Occupation, annual crop, non-irrigated [natural resource, land]: 0.000188089 m2*year; lognormal variance with pedigree 0.022, pedigree (3,5,4,5,3)
- Transformation, from annual crop, non-irrigated [natural resource, land]: 2.65538 m2; lognormal variance with pedigree 0.028, pedigree (3,5,4,5,3)
- Transformation, to annual crop, non-irrigated [natural resource, land]: 2.65538 m2; lognormal variance with pedigree 0.028, pedigree (3,5,4,5,3)

## Emissions to nature
- Ammonia [air, non-urban air or from high stacks]: 0.00138605 kg; lognormal variance with pedigree 0.028, pedigree (3,5,4,5,3)
- Dinitrogen monoxide [air, non-urban air or from high stacks]: 0.000638467 kg; lognormal variance with pedigree 0.05, pedigree (3,5,4,5,3)
- Nitrogen oxides [air, non-urban air or from high stacks]: 0.000134078 kg; lognormal variance with pedigree 0.05, pedigree (3,5,4,5,3)
- Acetochlor [soil, agricultural]: 0.000122678 kg; lognormal variance with pedigree 0.053, pedigree (3,5,4,5,3)
- Alpha-cypermethrin [soil, agricultural]: 3.72359e-6 kg; lognormal variance with pedigree 0.053, pedigree (3,5,4,5,3)
- Atrazine [soil, agricultural]: 0.000149152 kg; lognormal variance with pedigree 0.053, pedigree (3,5,4,5,3)
- Azoxystrobin [soil, agricultural]: 1.82768e-5 kg; lognormal variance with pedigree 0.053, pedigree (3,5,4,5,3)
- Bromoxynil [soil, agricultural]: 1.51462e-5 kg; lognormal variance with pedigree 0.053, pedigree (3,5,4,5,3)
- Cadmium II [soil, agricultural]: 1.47642e-7 kg; lognormal variance with pedigree 0.06, pedigree (3,5,4,5,3)
- Chromium III [soil, agricultural]: -8.70744e-6 kg; normal variance with pedigree 0.04, pedigree (3,5,4,5,3)
- Copper ion [soil, agricultural]: 2.60449e-7 kg; lognormal variance with pedigree 0.06, pedigree (3,5,4,5,3)
- Difenoconazole [soil, agricultural]: 5.53203e-6 kg; lognormal variance with pedigree 0.053, pedigree (3,5,4,5,3)
- Glyphosate [soil, agricultural]: 0.000134276 kg; lognormal variance with pedigree 0.053, pedigree (3,5,4,5,3)
- Imidacloprid [soil, agricultural]: 1.54897e-7 kg; lognormal variance with pedigree 0.05, pedigree (3,5,4,5,3)
- Lambda-cyhalothrin [soil, agricultural]: 7.8548e-7 kg; lognormal variance with pedigree 0.053, pedigree (3,5,4,5,3)
- Lead II [soil, agricultural]: 4.3813e-7 kg; lognormal variance with pedigree 0.06, pedigree (3,5,4,5,3)
- Mercury II [soil, agricultural]: 5.28371e-8 kg; lognormal variance with pedigree 0.06, pedigree (3,5,4,5,3)
- Mesotrione [soil, agricultural]: 7.74384e-6 kg; lognormal variance with pedigree 0.053, pedigree (3,5,4,5,3)
- Metolachlor [soil, agricultural]: 0.000267204 kg; lognormal variance with pedigree 0.053, pedigree (3,5,4,5,3)
- Nickel II [soil, agricultural]: 3.07357e-7 kg; lognormal variance with pedigree 0.06, pedigree (3,5,4,5,3)
- Pesticides, unspecified [soil, agricultural]: 3.17048e-6 kg; lognormal variance with pedigree 0.053, pedigree (3,5,4,5,3)
- Sulfuric acid [soil, agricultural]: 0.00017938 kg; lognormal variance with pedigree 0.053, pedigree (3,5,4,5,3)
- Terbuthylazin [soil, agricultural]: 0.000112465 kg; lognormal variance with pedigree 0.053, pedigree (3,5,4,5,3)
- Thiamethoxam [soil, agricultural]: 1.98915e-5 kg; lognormal variance with pedigree 0.053, pedigree (3,5,4,5,3)
- Zinc II [soil, agricultural]: 4.42804e-6 kg; lognormal variance with pedigree 0.06, pedigree (3,5,4,5,3)
- Cadmium II [water, ground-]: 6.32688e-8 kg; lognormal variance with pedigree 0.11, pedigree (3,5,4,5,3)
- Cadmium II [water, surface water]: 6.2135e-9 kg; lognormal variance with pedigree 0.11, pedigree (3,5,4,5,3)
- Chromium III [water, ground-]: 4.12784e-6 kg; lognormal variance with pedigree 0.11, pedigree (3,5,4,5,3)
- Chromium III [water, surface water]: 9.60086e-6 kg; lognormal variance with pedigree 0.11, pedigree (3,5,4,5,3)
- Copper ion [water, ground-]: 8.15653e-7 kg; lognormal variance with pedigree 0.11, pedigree (3,5,4,5,3)
- Copper ion [water, surface water]: 9.31762e-7 kg; lognormal variance with pedigree 0.11, pedigree (3,5,4,5,3)
- Lead II [water, ground-]: 1.41442e-8 kg; lognormal variance with pedigree 0.11, pedigree (3,5,4,5,3)
- Lead II [water, surface water]: 9.4052e-8 kg; lognormal variance with pedigree 0.11, pedigree (3,5,4,5,3)
- Mercury II [water, ground-]: 2.785e-10 kg; lognormal variance with pedigree 0.11, pedigree (3,5,4,5,3)
- Mercury II [water, surface water]: 3.19971e-9 kg; lognormal variance with pedigree 0.11, pedigree (3,5,4,5,3)
- Nickel II [water, surface water]: 4.60925e-7 kg; lognormal variance with pedigree 0.11, pedigree (3,5,4,5,3)
- Nitrate [water, ground-]: 0.00505 kg; lognormal variance with pedigree 0.06, pedigree (3,5,4,5,3)
- Phosphate [water, ground-]: 5.69281e-5 kg; lognormal variance with pedigree 0.06, pedigree (3,5,4,5,3)
- Phosphate [water, surface water]: 0.000150203 kg; lognormal variance with pedigree 0.06, pedigree (3,5,4,5,3)
- Phosphorus [water, surface water]: 5.15543e-5 kg; lognormal variance with pedigree 0.06, pedigree (3,5,4,5,3)
- Zinc II [water, ground-]: 3.46688e-6 kg; lognormal variance with pedigree 0.11, pedigree (3,5,4,5,3)
- Zinc II [water, surface water]: 1.06613e-6 kg; lognormal variance with pedigree 0.11, pedigree (3,5,4,5,3)

## Sampling procedure
Production data are from Grain SA planning models and maize production reports and from the Griekwaland Wes Korporatief (GWK) cost guide (Grain SA Operational planning of white maize grain production in the production year 2011/2012 in Eastern Highveld, South Africa; Lynnwood Ridge, South Africa, 2014; Grain SA Operational planning of white maize grain production in the production year 2011/2012 in Northwest, South Africa; Lynnwood Ridge, South Africa, 2014; Grain SA Operational planning of white maize grain production in the production year 2011/2012 in Central and Northern Free State, South Africa; Lynnwood Ridge, South Africa, 2014; Grain SA Maize production in South Africa from 2006-2013; Lynnwood Ridge, South Africa, 2014; Rechtus, S. GWK cost guide data 2016). Transport distances were obtained from J. Coetzee, an extension officer for South African Breweries Ltd., as well as by using online distance calculators for land ( DistanceFromTo Available online: http://www.distancefromto.net (accessed on Apr 15, 2015)) and sea (SeaRates.com Available online: http://www.searates.com/de/reference/portdistance (accessed on Apr 15, 2015).) routes.

## Extrapolations
This dataset has been copied from an original dataset covering the geography South Africa. The planning models used as data sources apply to cultivation in three maize production regions in South Africa: the Eastern Highveld, North West, and Central and Northern Free State. These data are assumed to be representative for all South African grain maize production.
