# concrete production, 20MPa, self-construction, for building construction, with cement, type ICo

Dataset: EcoSpold 2, unit process
Geography: PE
Time period: 2014-01-01 to 2022-12-31
Technology level: current
Classification: EcoSpold01Categories: construction materials/concrete
Classification: ISIC rev.4 ecoinvent: 2395:Manufacture of articles of concrete, cement and plaster
Synonyms: self-construction concrete
Scenario: Business-as-Usual
System model: Substitution, consequential, long-term
Generated by: Simon Gmunder
Published in: Gmünder S. 2017
Database: ecoinvent
isCopyrightProtected: false
accessRestrictedTo: 1

## General comment
This dataset represents the production of 20MPa self-construction concrete for buidling construction and gereral use. Density: 2'358 kg/m³ - w/c: 0.65. Ingredients (for 1 m³): cement type ICo 383 kg, Water 256 kg, Gravel 956 kg, Sand 765kg,

## Included activities start
From reception of raw materials at the construction site.

## Included activities end
This activity ends after concrete mixing at the construction site.

The dataset includes the whole manufacturing processes to produce self-construction concrete, but does not include the on site mixing infrastrucutre.

Water for washing is included.

Concrete losses of 3% are considered.

## Geography
Representative production of self-construction concrete 20 MPa with type ICo cement in Peru. Data based from main cement producers and personal comunications with local experts.

## Technology
Represent the current technology for self-construction concrete production in Peru.

## Time period
The production volume of 2016 is considered. The data from sustainability reports goes from 2014 to 2016. Data have been reported with the production volume of corresponding year.

## Parameters
- losses: 0.03 dimensionless; lognormal variance with pedigree 0.018, pedigree (4,5,1,5,1)
  Estimated value. Losses due to returned concrete from construction sites.
- total aggregates: 1721 kg/m3; name aggregates_tot; lognormal variance with pedigree 0.0046, pedigree (3,4,1,1,1)
  Estimated value. The mix design contains 1721 kg /m3 of aggregates (Pimentel, 2017).
- water to cement ratio: 0.67 dimensionless; name w_c_ratio; lognormal variance with pedigree 0.0046, pedigree (3,4,1,1,1)
- water withdrawal, per cubic meter of concrete: 316.275 kg/m3; name water_withdrawal; = w_c_ratio*cement/(1+losses)+60; lognormal variance with pedigree 0.0046, pedigree (3,4,1,1,1)
  Calculated value. The water cement ratio (w/c) is 0.67. In addition, 60kg is assumed for other water uses such as washing, dust treatment, irrigation, etc.

## Reference product
- concrete, 20MPa: 1 m3; By-product classification allocatable product; CPC 37510: Non-refractory mortars and concretes
  production volume 6.615e6 m3
  properties: carbon allocation 0 kg, carbon content 0, carbon content, fossil 0, cement content 393.975 kg, dry mass 2103.5 kg, gravel content 1063.58 kg, price 185 EUR2005, sand content 709.052 kg, water content 0.121833, water in wet mass 256.275 kg, wet mass 2359.78 kg

## Inputs from technosphere
- cement, type ICo: 393.975 kg; lognormal variance with pedigree 0.0112, pedigree (4,3,3,5,1)
  properties: dry mass 1 kg, wet mass 1 kg
- electricity, medium voltage: 0.85799 kWh; lognormal variance with pedigree 0.0113, pedigree (2,3,3,3,1)
- gravel, crushed: 1063.58 kg; lognormal variance with pedigree 0.0106, pedigree (4,4,3,1,1)
  properties: dry mass 1 kg, wet mass 1 kg
- lubricating oil: 0.0499 kg; lognormal variance with pedigree 0.3066, pedigree (2,5,3,5,1)
  properties: carbon content, fossil 0.75, dry mass 1 kg, heating value, net 40.2 MJ, wet mass 1 kg
- sand: 709.052 kg; lognormal variance with pedigree 0.0088, pedigree (4,2,3,3,1)
  properties: dry mass 1 kg, wet mass 1 kg
- scrap steel: -0.0238 kg; lognormal variance with pedigree 0.0113, pedigree (2,3,1,3,1)
  properties: dry mass 1 kg, wet mass 1 kg
- steel, low-alloyed, hot rolled: 0.0238 kg; lognormal variance with pedigree 0.0208, pedigree (2,5,4,5,1)
  properties: carbon content, fossil 0.005, dry mass 1 kg, wet mass 1 kg
- synthetic rubber: 0.0345 kg; lognormal variance with pedigree 0.7306, pedigree (2,5,3,5,1)
  properties: carbon content, fossil 0.871949, dry mass 1 kg, heating value, net 26.42 MJ, wet mass 1 kg
- tap water: 325.763 kg; lognormal variance with pedigree 0.0173, pedigree (4,3,3,3,3)
  properties: carbon content, fossil 0.00178991, dry mass 0.000337476 kg, water content 2962.17, wet mass 1 kg
- waste concrete: -70.7933 kg; lognormal variance with pedigree 0.0113, pedigree (2,3,1,3,1)
  properties: dry mass 0.5 kg, water content 1, wet mass 1 kg
- waste mineral oil: -0.0499 kg; lognormal variance with pedigree 0.0113, pedigree (2,3,1,3,1)
  properties: carbon content, fossil 0.864444, dry mass 0.9 kg, heating value, net 34.7 MJ, water content 0.111111, wet mass 1 kg
- waste rubber, unspecified: -0.0345 kg; lognormal variance with pedigree 0.0113, pedigree (2,3,1,3,1)
  properties: carbon content, fossil 0.853, dry mass 1 kg, heating value, net 27.19 MJ, wet mass 1 kg
- wastewater from concrete production: -0.02472 m3; lognormal variance with pedigree 0.0113, pedigree (2,3,1,3,1)
  properties: carbon content, fossil 0.027074, dry mass 0.449139 kg, water content 2225.48, wet mass 1000 kg

## Emissions to nature
- Water [air, unspecified]: 0.03708 m3; lognormal variance with pedigree 0.0019, pedigree (2,3,3,3,1)

## Sampling procedure
The 1:2:2.5 concrete recipe is considered as the most commonly used mix design for self-construction in Peru, based on personal communication with the concrete association (Ing. Pimentel, 2017).

Unit flows were calculated by dividing the amounts of inputs and outputs by the total concrete production in mass.

## Extrapolations
The main values are considered representative for a typical production of ready mix concrete for building construction in Peru.

The auxiliary material (rubber, lube oil) are based on a sampling of 34 concrete plants in Brazil.
