# aluminium production, primary, ingot

Dataset: EcoSpold 2, unit process
Geography: IAI Area, Russia & RER w/o EU27 & EFTA
Time period: 2015-01-01 to 2022-12-31
Technology level: current
Classification: EcoSpold01Categories: metals/extraction
Classification: ISIC rev.4 ecoinvent: 2420:Manufacture of basic precious and other non-ferrous metals
Scenario: Business-as-Usual
System model: Substitution, consequential, long-term
Share of production covered: 0 %
Generated by: Linlin Wu
Published in: International Aluminium Insitute 2015
Database: ecoinvent
isCopyrightProtected: false
accessRestrictedTo: 1

## General comment
The dataset represents the production of 1kg of primary aluminium ingot. Molten aluminium produced from the electrolytic process is tapped from reduction cells, weighed, sampled and analysed before it is poured into a holding furnace and heated to approximately 750°C using natural gas as a fuel. Alloying elements, such as magnesium, silicon and manganese, for additional strength, corrosion resistance and other properties, are added to the aluminium. It is typically at this point in the process that clean, sorted scrap can also be added but for the purposes of this dataset, scrap remelting is excluded. During furnace charging and preparation, aluminium dross (a thick liquid or solid phase) forms at the surface of molten aluminium. This mixture of aluminium oxides is remelted to recover the aluminium that would otherwise be lost. Metallurgical analysis verifies that the metal meets customer specifications before the molten, alloyed (or pure, unalloyed) aluminium is cast into products of specific dimensions, before being weighed, bundled and strapped ready for transport. Original dataset included some alloying elements. These were replaced by liquid aluminium to generate a theoretical 100% aluminium ingot.
For more information on the process, please go to
http://primary.world-aluminium.org/index.php?id=285
[This dataset is meant to replace the following datasets:]

## Included activities start
The unit process begins with the unloading of process material to their storage areas on site. The operations covered by this dataset include:
* pre-treatment of hot metal
* recovery and handling of internal process scrap
* batching, metal treatment and casting operations
* homogenizing, sawing and packaging activities
* maintenance and repair of plant and equipment
* treatment of process air, liquids and solids.
* production of infrastructure (through rough estimate) was also added.

## Included activities end
The output of this unit process is packaged aluminium ingots, wrought alloy.

## Reference product
- aluminium, primary, ingot: 1 kg; By-product classification allocatable product; CPC 41431: Unwrought aluminium
  production volume 3.578e9 kg
  properties: carbon allocation 0 kg, carbon content 0, carbon content, fossil 0, carbon content, non-fossil 0, dry mass 1 kg, price 3.67 EUR2005, water content 0, water in wet mass 0 kg, wet mass 1 kg

## Inputs from technosphere
- aluminium casting facility: 1.54e-10 unit; lognormal variance with pedigree 0.5, pedigree (5,5,5,5,5)
- aluminium, primary, liquid: 0.330916, 0.669084 kg (2 suppliers, which the file names only by identifier); sum of these 1 kg; lognormal variance with pedigree 0.0012, pedigree (1,3,3,1,1)
  properties: dry mass 1 kg, wet mass 1 kg
- argon, liquid: 0.000261, 0.001239 kg (2 suppliers, which the file names only by identifier); sum of these 0.0015 kg; lognormal variance with pedigree 0.0052, pedigree (1,3,5,5,1)
  properties: dry mass 1 kg, wet mass 1 kg
- chlorine, liquid: 8.23561e-6, 1.66439e-6 kg (2 suppliers, which the file names only by identifier); sum of these 9.9e-6 kg; lognormal variance with pedigree 0.0012, pedigree (1,3,3,1,1)
- corrugated board box: 0.00129381, 0.000506194 kg (2 suppliers, which the file names only by identifier); sum of these 0.0018 kg; lognormal variance with pedigree 0.0046, pedigree (1,1,5,5,1)
  properties: carbon content, fossil 0.000656085, carbon content, non-fossil 0.432275, dry mass 0.945 kg, heating value, net 12.86 MJ, water content 0.0582011, wet mass 1 kg
- cryolite: 0.0004 kg; lognormal variance with pedigree 0.0046, pedigree (1,1,5,5,1)
  properties: dry mass 1 kg, wet mass 1 kg
- dross from Al electrolysis: -0.014036 kg; lognormal variance with pedigree 0.0012, pedigree (1,3,1,1,1)
  properties: carbon content, fossil 0.0075, dross sent to landfill 0.000746 kg, dross sent to recycling 0.01329 kg, dry mass 1 kg, wet mass 1 kg
- electricity, medium voltage, aluminium industry: 0.095 kWh; lognormal variance with pedigree 0.0012, pedigree (1,3,3,1,1)
- filter dust from Al electrolysis: -0.000562 kg; lognormal variance with pedigree 0.0012, pedigree (1,3,1,1,1)
  properties: carbon content, fossil 0.11586, dry mass 1 kg, filter dust to landfill 3.2e-5 kg, filter dust to recycling 0.00053 kg, wet mass 1 kg
- heat, district or industrial, natural gas: 0.00306744, 0.0071491 MJ (2 suppliers, which the file names only by identifier); sum of these 0.0102165 MJ; lognormal variance with pedigree 0.0006, pedigree (1,3,3,1,1)
  properties: Corresponding fuel use 1.04 MJ, fuel input in physical units, m3 0.000263 m3, heating value, net 1 MJ
- heat, district or industrial, other than natural gas: 0.0417854 MJ; lognormal variance with pedigree 0.0006, pedigree (1,3,3,1,1)
  properties: Corresponding fuel use 1.053 MJ, fuel input in physical units, kg 0.0011 kg, heating value, net 1 MJ
- heat, district or industrial, other than natural gas: 0.0101377 MJ; lognormal variance with pedigree 0.0006, pedigree (1,3,3,1,1)
  properties: Corresponding fuel use 1.053 MJ, fuel input in physical units, kg 0.00025 kg, heating value, net 1 MJ
- inert waste, for final disposal: -0.00184 kg; lognormal variance with pedigree 0.0018, pedigree (2,3,1,1,1)
  properties: amount of non-specified waste to landfill 0.00105 kg, amount of refractory material sent to landfill 0.00047 kg, amount of refractory material sent to recycling 0.00032 kg, dry mass 0.995 kg, water content 0.00502513, wet mass 1 kg
- nitrogen, liquid: 0.0003, 0.0003 kg (2 suppliers, which the file names only by identifier); sum of these 0.0006 kg; lognormal variance with pedigree 0.0046, pedigree (1,1,5,5,1)
  properties: dry mass 1 kg, wet mass 1 kg
- palm oil, crude: 8e-5 kg; lognormal variance with pedigree 0.0046, pedigree (1,1,5,5,1)
  properties: carbon content, non-fossil 0.752881, dry mass 1 kg, heating value, net 37 MJ, wet mass 1 kg
- refractory, fireclay, packed: 0.0007 kg; lognormal variance with pedigree 0.004, pedigree (1,1,5,5,1)
  properties: dry mass 1 kg, wet mass 1 kg
- silicon, metallurgical grade: 0.0108 kg; lognormal variance with pedigree 0.0046, pedigree (1,1,5,5,1)
  properties: dry mass 1 kg, wet mass 1 kg
- stone wool: 0.00011 kg; lognormal variance with pedigree 0.0046, pedigree (1,1,5,5,1)
  properties: carbon content, fossil 0.015401, dry mass 1 kg, wet mass 1 kg

## Inputs from nature
- Water, unspecified natural origin [natural resource, in water]: 0.0022 m3; lognormal variance with pedigree 0.0012, pedigree (1,3,3,1,1)

## Emissions to nature
- Dioxins, measured as 2,3,7,8-tetrachlorodibenzo-p-dioxin [air, unspecified]: 7e-13 kg; lognormal variance with pedigree 0.0406, pedigree (1,3,3,1,1)
- Hydrochloric acid [air, unspecified]: 2.04e-5 kg; lognormal variance with pedigree 0.0406, pedigree (1,3,3,1,1)
- Nitrogen oxides [air, lower stratosphere + upper troposphere]: 7.54e-5 kg; lognormal variance with pedigree 0.0406, pedigree (1,3,3,1,1)
- Particulate Matter, < 2.5 um [air, unspecified]: 1.404e-5 kg; lognormal variance with pedigree 0.0012, pedigree (2,3,3,1,1)
- Particulate Matter, > 10 um [air, unspecified]: 7.8e-6 kg; lognormal variance with pedigree 0.0012, pedigree (2,3,3,1,1)
- Particulate Matter, > 2.5 um and < 10um [air, unspecified]: 1.716e-5 kg; lognormal variance with pedigree 0.0012, pedigree (2,3,3,1,1)
- Sulfur dioxide [air, unspecified]: 3.34e-5 kg; lognormal variance with pedigree 0.0012, pedigree (1,3,3,1,1)
- Water [air, unspecified]: 0.0012 m3; lognormal variance with pedigree 0.2106, pedigree (5,5,5,5,5)
- Oils, unspecified [water, unspecified]: 3.4e-5 kg; lognormal variance with pedigree 0.3006, pedigree (1,3,3,1,1)
- Suspended solids, unspecified [water, unspecified]: 0.000266 kg; lognormal variance with pedigree 0.0406, pedigree (1,3,3,1,1)
- Water [water, unspecified]: 0.001887 m3; lognormal variance with pedigree 0.0012, pedigree (1,3,3,1,1)

## Sampling procedure
Data is from IAI surveys. which are carried out by IAI for its member and non-member companies. The surveys were conducted in 2016 for 2015 data. A number of flows not covered by the survey were inherited from the ecoinvent 2.2 dataset.
No data is reported from this region for 2015, therefore,weighted averages from global reported facilities are adopted. Energy data collected from 2015 IAI energy survey covers over 40% of reigonal produciton.

## Extrapolations
The survey was global in reach. Dataset based on primary aluminium producers is assumed to be valid for ingot casting with global average scrap content.
