# treatment of ash from paper production sludge, residual material landfill

Dataset: EcoSpold 2, unit process
Geography: RoW
Time period: 1994-01-01 to 2022-12-31
Technology level: current
Classification: EcoSpold01Categories: waste management/residual material landfill
Classification: ISIC rev.4 ecoinvent: 3822:Treatment and disposal of hazardous waste
Synonyms: ash from incineration of wastewater treatment sludge from paper production
Tags: ConvertedDataset; Treatment
Scenario: Business-as-Usual
System model: Substitution, consequential, long-term
Generated by: Gabor Doka (obsolete)
Published in: Doka G. 2009
Database: ecoinvent
isCopyrightProtected: true
accessRestrictedTo: 1

## General comment
Inventoried waste contains 100% composition of paper sludge ash; .
waste composition (wet, in ppm): H2O n.a.; O 30083; H n.a.; C 9164.7; S 41259; N 6222.5; P 146230; B n.a.; Cl 0.012408; Br n.a.; F 9.6141; I n.a.; Ag n.a.; As 10.215; Ba n.a.; Cd 1.5403; Co 32.145; Cr 98.271; Cu 560.17; Hg 1.0175; Mn 1069.5; Mo 22.403; Ni 60.085; Pb 267.55; Sb n.a.; Se n.a.; Sn 79.568; V n.a.; Zn 865.8; Be n.a.; Sc n.a.; Sr n.a.; Ti n.a.; Tl n.a.; W n.a.; Si 199030; Fe 158420; Ca 221030; Al 50413; K 14897; Mg 29415; Na 90757;
Share of carbon in waste that is biogenic 100%.
[This dataset was already contained in the ecoinvent database version 2. It was not individually updated during the transfer to ecoinvent version 3. Life Cycle Impact Assessment results may still have changed, as they are affected by changes in the supply chain, i.e. in other datasets. This dataset was generated following the ecoinvent quality guidelines for version 2. It may have been subject to central changes described in the ecoinvent version 3 change report (http://www.ecoinvent.org/database/ecoinvent-version-3/reports-of-changes/), and the results of the central updates were reviewed extensively. The changes added e.g. consistent water flows and other information throughout the database. The documentation of this dataset can be found in the ecoinvent reports of version 2, which are still available via the ecoinvent website. The change report linked above covers all central changes that were made during the conversion process.]

## Included activities end
Waste-specific short-term emissions to water from leachate. Long-term emissions from landfill to ground water.

## Geography
Technology encountered in Switzerland in 2000. Landfill includes base seal and leachate collection system.

## Technology
Swiss residual material landfill for polluted, inorganic waste. With base seal and leachate collection system. Recultivation after closure.

## Time period
Waste composition as given in literature reference, theoretical data or other source. Transfer coefficients from prospective model.

## Reference product
- ash from paper production sludge: -1 kg; By-product classification Waste; CPC 39: Wastes or scraps
  production volume 2.67833 kg
  properties: carbon allocation 0.0092 kg, carbon content 0.0092, carbon content, fossil 0, carbon content, non-fossil 0.0092, dry mass 1 kg, heating value, net 0 MJ, price 0 EUR2005, water content 0, water in wet mass 0 kg, wet mass 1 kg

## Inputs from technosphere
- process-specific burdens, residual material landfill: 1 kg; lognormal variance with pedigree 0.002, pedigree (1,1,5,5,1)
- residual material landfill: 2.0833e-9 unit; lognormal variance with pedigree 0.002, pedigree (1,1,5,5,1)

## Emissions to nature
- Aluminium III [water, ground-, long-term]: 0.014965 kg; lognormal variance with pedigree 0.562, pedigree (1,1,5,5,1)
- Aluminium III [water, surface water]: 2.4984e-5 kg; lognormal variance with pedigree 0.932, pedigree (1,1,5,5,1)
- Arsenic ion [water, ground-, long-term]: 1.0215e-14 kg; lognormal variance with pedigree 1.292, pedigree (1,1,5,5,1)
- Arsenic ion [water, surface water]: 1.0215e-5 kg; lognormal variance with pedigree 1.262, pedigree (1,1,5,5,1)
- BOD5, Biological Oxygen Demand [water, ground-, long-term]: 0.0048959 kg; lognormal variance with pedigree 0.432, pedigree (1,1,5,5,1)
- BOD5, Biological Oxygen Demand [water, surface water]: 8.1734e-6 kg; lognormal variance with pedigree 1.022, pedigree (1,1,5,5,1)
- COD, Chemical Oxygen Demand [water, ground-, long-term]: 0.014968 kg; lognormal variance with pedigree 0.432, pedigree (1,1,5,5,1)
- COD, Chemical Oxygen Demand [water, surface water]: 2.4988e-5 kg; lognormal variance with pedigree 1.022, pedigree (1,1,5,5,1)
- Cadmium II [water, ground-, long-term]: 1.0457e-8 kg; lognormal variance with pedigree 7.742, pedigree (1,1,5,5,1)
- Cadmium II [water, surface water]: 1.7458e-11 kg; lognormal variance with pedigree 2.762, pedigree (1,1,5,5,1)
- Calcium II [water, ground-, long-term]: 0.019972 kg; lognormal variance with pedigree 1.502, pedigree (1,1,5,5,1)
- Calcium II [water, surface water]: 3.3342e-5 kg; lognormal variance with pedigree 0.962, pedigree (1,1,5,5,1)
- Chloride [water, ground-, long-term]: 8.8595e-9 kg; lognormal variance with pedigree 1.932, pedigree (1,1,5,5,1)
- Chloride [water, surface water]: 3.5489e-9 kg; lognormal variance with pedigree 1.962, pedigree (1,1,5,5,1)
- Chromium VI [water, ground-, long-term]: 1.866e-5 kg; lognormal variance with pedigree 0.972, pedigree (1,1,5,5,1)
- Chromium VI [water, surface water]: 5.9073e-6 kg; lognormal variance with pedigree 1.132, pedigree (1,1,5,5,1)
- Cobalt II [water, ground-, long-term]: 5.4956e-6 kg; lognormal variance with pedigree 1.892, pedigree (1,1,5,5,1)
- Cobalt II [water, surface water]: 9.1747e-9 kg; lognormal variance with pedigree 1.932, pedigree (1,1,5,5,1)
- Copper ion [water, ground-, long-term]: 2.1563e-5 kg; lognormal variance with pedigree 3.392, pedigree (1,1,5,5,1)
- Copper ion [water, surface water]: 3.5999e-8 kg; lognormal variance with pedigree 1.752, pedigree (1,1,5,5,1)
- DOC, Dissolved Organic Carbon [water, ground-, long-term]: 0.0059227 kg; lognormal variance with pedigree 0.432, pedigree (1,1,5,5,1)
- DOC, Dissolved Organic Carbon [water, surface water]: 9.8877e-6 kg; lognormal variance with pedigree 1.022, pedigree (1,1,5,5,1)
- Fluoride [water, ground-, long-term]: 9.0931e-6 kg; lognormal variance with pedigree 1.272, pedigree (1,1,5,5,1)
- Fluoride [water, surface water]: 5.21e-7 kg; lognormal variance with pedigree 1.452, pedigree (1,1,5,5,1)
- Iron ion [water, ground-, long-term]: 0.00079397 kg; lognormal variance with pedigree 7.092, pedigree (1,1,5,5,1)
- Iron ion [water, surface water]: 1.3255e-6 kg; lognormal variance with pedigree 1.372, pedigree (1,1,5,5,1)
- Lead II [water, ground-, long-term]: 1.3878e-6 kg; lognormal variance with pedigree 7.752, pedigree (1,1,5,5,1)
- Lead II [water, surface water]: 2.3169e-9 kg; lognormal variance with pedigree 2.112, pedigree (1,1,5,5,1)
- Magnesium [water, ground-, long-term]: 0.0033423 kg; lognormal variance with pedigree 1.432, pedigree (1,1,5,5,1)
- Magnesium [water, surface water]: 5.5798e-6 kg; lognormal variance with pedigree 1.112, pedigree (1,1,5,5,1)
- Manganese II [water, ground-, long-term]: 8.8341e-6 kg; lognormal variance with pedigree 6.402, pedigree (1,1,5,5,1)
- Manganese II [water, surface water]: 1.4748e-8 kg; lognormal variance with pedigree 1.872, pedigree (1,1,5,5,1)
- Mercury II [water, ground-, long-term]: 4.8027e-8 kg; lognormal variance with pedigree 3.902, pedigree (1,1,5,5,1)
- Mercury II [water, surface water]: 8.0178e-11 kg; lognormal variance with pedigree 2.552, pedigree (1,1,5,5,1)
- Molybdenum VI [water, ground-, long-term]: 1.0285e-7 kg; lognormal variance with pedigree 1.182, pedigree (1,1,5,5,1)
- Molybdenum VI [water, surface water]: 2.23e-5 kg; lognormal variance with pedigree 1.162, pedigree (1,1,5,5,1)
- Nickel II [water, ground-, long-term]: 2.1753e-5 kg; lognormal variance with pedigree 1.292, pedigree (1,1,5,5,1)
- Nickel II [water, surface water]: 3.6316e-8 kg; lognormal variance with pedigree 1.752, pedigree (1,1,5,5,1)
- Nitrate [water, ground-, long-term]: 0.022353 kg; lognormal variance with pedigree 0.432, pedigree (1,1,5,5,1)
- Nitrate [water, surface water]: 0.0052036 kg; lognormal variance with pedigree 0.492, pedigree (1,1,5,5,1)
- Phosphate [water, ground-, long-term]: 0.10017 kg; lognormal variance with pedigree 0.652, pedigree (1,1,5,5,1)
- Phosphate [water, surface water]: 0.00016723 kg; lognormal variance with pedigree 0.872, pedigree (1,1,5,5,1)
- Potassium I [water, ground-, long-term]: 0.010698 kg; lognormal variance with pedigree 0.322, pedigree (1,1,5,5,1)
- Potassium I [water, surface water]: 0.0041992 kg; lognormal variance with pedigree 0.362, pedigree (1,1,5,5,1)
- Silicon [water, ground-, long-term]: 0.19858 kg; lognormal variance with pedigree 0.072, pedigree (1,1,5,5,1)
- Silicon [water, surface water]: 0.00044761 kg; lognormal variance with pedigree 0.622, pedigree (1,1,5,5,1)
- Sodium I [water, ground-, long-term]: 0.056698 kg; lognormal variance with pedigree 0.142, pedigree (1,1,5,5,1)
- Sodium I [water, surface water]: 0.034059 kg; lognormal variance with pedigree 0.162, pedigree (1,1,5,5,1)
- Sulfate [water, ground-, long-term]: 0.1105 kg; lognormal variance with pedigree 0.212, pedigree (1,1,5,5,1)
- Sulfate [water, surface water]: 0.01328 kg; lognormal variance with pedigree 0.322, pedigree (1,1,5,5,1)
- TOC, Total Organic Carbon [water, ground-, long-term]: 0.0059227 kg; lognormal variance with pedigree 0.432, pedigree (1,1,5,5,1)
- TOC, Total Organic Carbon [water, surface water]: 9.8877e-6 kg; lognormal variance with pedigree 1.022, pedigree (1,1,5,5,1)
- Tin ion [water, ground-, long-term]: 1.5077e-6 kg; lognormal variance with pedigree 4.922, pedigree (1,1,5,5,1)
- Tin ion [water, surface water]: 2.5171e-9 kg; lognormal variance with pedigree 2.102, pedigree (1,1,5,5,1)
- Zinc II [water, ground-, long-term]: 1.0611e-5 kg; lognormal variance with pedigree 5.522, pedigree (1,1,5,5,1)
- Zinc II [water, surface water]: 1.7715e-8 kg; lognormal variance with pedigree 1.842, pedigree (1,1,5,5,1)

## Sampling procedure
Landfill model based on observed leachate concentrations in literature. Extrapolated to 60'000 years heeding chemical characteristics. Initial waste composition from various literature sources.

## Extrapolations
This dataset has been copied from an original dataset covering the geography CH. The uncertainty has been adjusted accordingly.

## Review by Niels Jungbluth 2009-02-15
passed.
