# irrigation, sprinkler

Dataset: EcoSpold 2, unit process
Geography: RoW
Time period: 2015-01-01 to 2022-12-31
Technology level: current
Classification: ISIC rev.4 ecoinvent: 0161:Support activities for crop production
Scenario: Business-as-Usual
System model: Substitution, consequential, long-term
Generated by: Simon Gmünder
Published in: Gmünder S. 2017
Database: ecoinvent
isCopyrightProtected: true
accessRestrictedTo: 1

## General comment
This dataset represents the sprinkler irrigation (global dataset) with a 75% irrigation efficieny. The inventory includes the water pumping of ground water and surface water, as well as the infrastructure. The water supplied to the plants (1m3) and the water evaporated or infiltrated shall be included in the crop production datasets.

## Included activities start
This dataset starts with pumping water from wells and water bodies.

## Included activities end
This dataset ends with delivering water to the plant and includes the water pumping, energy use, infrastructure, but not the water emissions of irrigation (shall be included in the crop production dataset).

## Geography
This dataset contains global data and general, technology specific information.

## Technology
Sprinkler irrigation is a method of applying irrigation water similar to natural rainfall. Water is distributed through a system of pipes usually by pumping. It is then sprayed into the air through sprinklers so that it breaks up into small water drops which fall to the ground. The pump supply system, sprinklers and operating conditions must be designed to enable a uniform application of water.
This method is suited for most row, field and tree crops and water can be sprayed over or under the crop. Sprinklers are best suited to sandy soils with high infiltration rates although they are adaptable to most soils, nevertheless, are not suitable for soils which easily form a crust.
A good clean supply of water, free of suspended sediments, is require to avoid problems of sprinkler nozzle blockage and spoiling the crop by coating it with sediment (FAO, 1985b)

## Time period
The data was collected for the given time range.

## Parameters
- diesel consumption for installation: 3.78 dimensionless; name diesel_consumption; lognormal variance with pedigree 0.0193, pedigree (4,5,3,3,2)
  Calculated value. Based on measurements. (Gmuender et al, 2017)
- dynamic pressure head: 37.7 dimensionless; name head_DP; lognormal variance with pedigree 0.0193, pedigree (4,5,3,3,2)
  Approximation. The friction head and pressure head for drip irrigation is assumed to be 2.65 bar or 27m and 3.7 bar or 37.7m for sprinkler systems (FAO 2007). Traditional surface gravity methods do not need external energy for operation.
- elevation head ground water: 30 dimensionless; name head_GW; lognormal variance with pedigree 0.0193, pedigree (4,5,3,3,2)
  Approximation. We approximate the average ground water table for each country by overlaying data on the areas with irrigation with information on the average ground water table. (Gmuender et al, 2017)
- elevation head surface water: 7 dimensionless; name head_SW; lognormal variance with pedigree 0.0193, pedigree (4,5,3,3,2)
  Approximation. Surface water irrigation systems can be based purely on gravity or use water pumps to lift water. Since no country specific surface for lift data is available, we assume a 7m lift for surface water for pressurized systems and for gravity systems based on US irrigation survey on lift from surface water irrigation (USDA, 2014).
- engine efficiency, electricity: 0.8 dimensionless; name Engine_efficiency_electricity; lognormal variance with pedigree 0.0193, pedigree (4,5,3,3,2)
  Estimated value. The drive or motor efficiency is mainly dependent on the type of motor and the load. The efficiency typically ranges between 70% and 90% for electric motors and between 50% and 75% for diesel engines. For this study we use an efficiency of 80% for electric motors and 60% for diesel motors.
- engine eficiency, diesel: 0.6 dimensionless; name engine_efficiency_diesel; lognormal variance with pedigree 0.0193, pedigree (4,5,3,3,2)
  (same comment as for engine efficiency, electricity)
- fraction drip irrigation: 0.04 dimensionless; name fraction_drip; lognormal variance with pedigree 0.0193, pedigree (4,5,3,3,2)
  Literature value. Share of drip irrigation technology per country. The AQUASTAT database reports water statistics at country level (FAO, 2016). For European countries the agri-environmental indicator “irrigation methods” of the Eurostat database is used (Eurostat, 2017). For Canada, specific statistics are available in the report “Irrigation methods and conservation practices on Canadian farms” (Statistics Canada, 2012). The information for US irrigation data is based on the irrigation farm survey from 2013 (USDA, 2014). The irrigation efficiency is used to convert the share of irrigation technologies per area (ha) to the amount of water used for irrigation (m3). fraction_drip + fraction_sprinkler_irrigation + fraction_surface_irrigation =1
- fraction ground water: 0.387289 dimensionless; name fraction_GW; = 1-fraction_NC-fraction_SW; lognormal variance with pedigree 0.0193, pedigree (4,5,3,3,2)
  Literature value. The share of water used for irrigation from ground water sources. The Global Map of Irrigation Areas (GMIA) version 5 includes sub-national irrigation statistics for most countries for the base year 2005 (Siebert et al., 2013). GMIA specifies between areas equipped for irrigation with ground water, surface water and non-conventional water sources. Non-conventional water is water from which the water source is not known or from waste water. The surface water is considered as “water from river” and the ground water withdrawal as “water from well in ground”. fraction_SW + fraction_GW + fraction_NC = 1
- fraction non-conventional water: 0.000836994 dimensionless; name fraction_NC
  Literature value. The share of water used for irrigation from non-conventional water sources, The Global Map of Irrigation Areas (GMIA) version 5 includes sub-national irrigation statistics for most countries for the base year 2005 (Siebert et al., 2013). GMIA specifies between areas equipped for irrigation with ground water, surface water and non-conventional water sources. Non-conventional water is water from which the water source is not known or from waste water (mainly tap water). The surface water is considered as “water from river” and the ground water withdrawal as “water from well in ground”. fraction_SW + fraction_GW + fraction_NC = 1
- fraction of diesel pumps: 0.3 dimensionless; name fraction_diesel; lognormal variance with pedigree 0.0193, pedigree (4,5,3,3,2)
  Estimated value. Diesel or electrical energy are most commonly used through pumping systems to lift water for irrigation on farms. We use different literature source to estimate the split between electric and diesel water pumps.
- fraction of electricity pumps: 0.7 dimensionless; name fraction_el; = 1- fraction_diesel; lognormal variance with pedigree 0.0193, pedigree (4,5,3,3,2)
  (same comment as for fraction of diesel pumps)
- fraction sprinkler irrigation: 0.16 dimensionless; name fraction_sprinkler_irrigation; lognormal variance with pedigree 0.0193, pedigree (4,5,3,3,2)
  Literature value. Share of sprinkler irrigation technology per country. The AQUASTAT database reports water statistics at country level (FAO, 2016). For European countries the agri-environmental indicator “irrigation methods” of the Eurostat database is used (Eurostat, 2017). For Canada, specific statistics are available in the report “Irrigation methods and conservation practices on Canadian farms” (Statistics Canada, 2012). The information for US irrigation data is based on the irrigation farm survey from 2013 (USDA, 2014). The irrigation efficiency is used to convert the share of irrigation technologies per area (ha) to the amount of water used for irrigation (m3). fraction_drip + fraction_sprinkler_irrigation + fraction_surface_irrigation =1'
- fraction surface irrigation: 0.8 dimensionless; name fraction_surface_irrigation; = 1- fraction_drip- fraction_sprinkler_irrigation; lognormal variance with pedigree 0.0193, pedigree (4,5,3,3,2)
  Literature value. Share of surface irrigation technology per country. The AQUASTAT database reports water statistics at country level (FAO, 2016). For European countries the agri-environmental indicator “irrigation methods” of the Eurostat database is used (Eurostat, 2017). For Canada, specific statistics are available in the report “Irrigation methods and conservation practices on Canadian farms” (Statistics Canada, 2012). The information for US irrigation data is based on the irrigation farm survey from 2013 (USDA, 2014). The irrigation efficiency is used to convert the share of irrigation technologies per area (ha) to the amount of water used for irrigation (m3). fraction_drip + fraction_sprinkler_irrigation + fraction_surface_irrigation =1
- fraction surface water: 0.611874 dimensionless; name fraction_SW; lognormal variance with pedigree 0.0193, pedigree (4,5,3,3,2)
  Literature value. The share of water used for irrigation from surface water sources, The Global Map of Irrigation Areas (GMIA) version 5 includes sub-national irrigation statistics for most countries for the base year 2005 (Siebert et al., 2013). GMIA specifies between areas equipped for irrigation with ground water, surface water and non-conventional water sources. Non-conventional water is water from which the water source is not known or from waste water. The surface water is considered as “water from river” and the ground water withdrawal as “water from well in ground”. fraction_SW + fraction_GW + fraction_NC = 1
- irrigation water: 19710 m3/ha/year; name irrigation_water; lognormal variance with pedigree 0.0119, pedigree (4,3,3,3,2)
  Literature value. FAO. (2007). Handbook of pressurized irrigation techniques. Rome, Italy
- pump efficiency: 0.7 dimensionless; name pump_efficiency; lognormal variance with pedigree 0.0193, pedigree (4,5,3,3,2)
  Estimated value. The water pump efficiency is defined as the water power divided by the power input at the pump shaft and the efficiency losses are cause for example due to friction losses or leakages. The efficiency typically ranges between 50% and 80%. For this study we assume an efficiency of 70%.
- water withdrawal for irrigation: 2.67264e12 dimensionless; name WW_irrigation; lognormal variance with pedigree 0.012625, pedigree (3,1,3,2,3)
  Literature value. Derived from FAO. (2016). AQUASTAT website. Food and Agriculture Organization of the United Nations (FAO).

## Reference product
- irrigation: 1 m3; By-product classification allocatable product; CPC 86119: Other support services to crop production
  production volume 3.08815e11 m3
  properties: carbon allocation 0 kg, carbon content 0, carbon content, fossil 0, carbon content, non-fossil 0, dry mass 0.11 kg, price 0.127 EUR2005, water content 9089.91, water in wet mass 999.89 kg, wet mass 1000 kg

## Inputs from technosphere
- brass: 2.6e-5 kg; lognormal variance with pedigree 0.0073, pedigree (3,4,4,3,2)
  properties: dry mass 1 kg, wet mass 1 kg
- bronze: 2.29325e-5 kg; lognormal variance with pedigree 0.0073, pedigree (3,4,4,3,2)
  properties: dry mass 1 kg, wet mass 1 kg
- bronze scrap, post-consumer: -2.29325e-5 kg; lognormal variance with pedigree 0.0198, pedigree (4,5,3,4,2)
  properties: dry mass 1 kg, wet mass 1 kg
- cast iron: 2.2e-6 kg; lognormal variance with pedigree 0.0073, pedigree (3,4,4,3,2)
  properties: carbon content, fossil 0.04, dry mass 1 kg, wet mass 1 kg
- diesel, burned in agricultural machinery: 9.58904e-6 MJ; lognormal variance with pedigree 0.0207, pedigree (3,5,4,3,3)
- extrusion, plastic pipes: 0.00086 kg; lognormal variance with pedigree 0.0073, pedigree (3,4,4,3,2)
- inert waste, for final disposal: -3.8e-7 kg; lognormal variance with pedigree 0.0198, pedigree (4,5,3,4,2)
  properties: dry mass 0.995 kg, water content 0.00502513, wet mass 1 kg
- injection moulding: 0.000759 kg; lognormal variance with pedigree 0.0073, pedigree (3,4,4,3,2)
- metal working, average for steel product manufacturing: 0.0001582 kg; lognormal variance with pedigree 0.0073, pedigree (3,4,4,3,2)
- nylon 6-6: 3.8e-7 kg; lognormal variance with pedigree 0.0073, pedigree (3,4,4,3,2)
  properties: carbon content, fossil 0.637168, dry mass 1 kg, heating value, net 30.9 MJ, wet mass 1 kg
- polyethylene, high density, granulate: 0.00049 kg; lognormal variance with pedigree 0.0073, pedigree (3,4,4,3,2)
  properties: carbon content, fossil 0.857143, dry mass 1 kg, heating value, net 42.47 MJ, wet mass 1 kg
- polyethylene, low density, granulate: 0.00037 kg; lognormal variance with pedigree 0.0073, pedigree (3,4,4,3,2)
  properties: carbon content, fossil 0.857143, dry mass 1 kg, heating value, net 42.47 MJ, wet mass 1 kg
- polypropylene, granulate: 5.9e-5 kg; lognormal variance with pedigree 0.0073, pedigree (3,4,4,3,2)
  properties: carbon content, fossil 0.857143, dry mass 1 kg, heating value, net 32.78 MJ, wet mass 1 kg
- polyvinylchloride, bulk polymerised: 0.0007 kg; lognormal variance with pedigree 0.0073, pedigree (3,4,4,3,2)
  properties: carbon content, fossil 0.387097, dry mass 1 kg, heating value, net 21.5 MJ, wet mass 1 kg
- steel, low-alloyed: 0.00013 kg; lognormal variance with pedigree 0.0073, pedigree (3,4,4,3,2)
  properties: carbon content, fossil 0.005, dry mass 1 kg, wet mass 1 kg
- tap water: 0.836994 kg
  properties: carbon content, fossil 0.00178991, dry mass 0.000337476 kg, water content 2962.17, wet mass 1 kg
- waste bulk iron, excluding reinforcement: -0.0001582 kg; lognormal variance with pedigree 0.0198, pedigree (4,5,3,4,2)
  properties: dry mass 1 kg, wet mass 1 kg
- waste polyethylene: -2.72438e-6, -1.4817e-6, -1.87705e-7, -2.80405e-7, -0.000800287, -1.35295e-6, -5.56248e-7, -9.11707e-7, -3.28121e-7, -7.97123e-7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 kg (34 suppliers, which the file names only by identifier); sum of these -0.00086 kg; lognormal variance with pedigree 0.0198, pedigree (4,5,3,4,2)
  properties: carbon content, fossil 0.825301, dry mass 0.996 kg, heating value, net 42.47 MJ, water content 0.00401606, wet mass 1 kg
- waste polypropylene: -1.50355e-7, -5.46863e-8, -5.49034e-5, -8.70882e-8, -2.40803e-7, -1.02926e-7, -1.01658e-8, -4.00239e-9, -4.91897e-8, -1.22075e-7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 kg (34 suppliers, which the file names only by identifier); sum of these -5.9e-5 kg; lognormal variance with pedigree 0.0198, pedigree (4,5,3,4,2)
  properties: carbon content, fossil 0.825208, dry mass 0.841 kg, heating value, net 32.78 MJ, water content 0.189061, wet mass 1 kg
- waste polyvinylchloride: -4.39007e-7, -1.03325e-6, -1.52784e-7, -1.77201e-6, -1.22115e-6, -1.44835e-6, -3.10484e-7, -1.20611e-7, -4.2688e-6, -4.27469e-7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 kg (34 suppliers, which the file names only by identifier); sum of these -0.0007 kg; lognormal variance with pedigree 0.0198, pedigree (4,5,3,4,2)
  properties: carbon content, fossil 0.440882, dry mass 0.998 kg, heating value, net 21.51 MJ, water content 0.00200401, wet mass 1 kg
- water pump operation, diesel: 0.375213 MJ; lognormal variance with pedigree 0.0073, pedigree (3,4,4,3,2)
  properties: price 0.07 EUR2005
- water pump operation, electric: 0.656622 MJ; lognormal variance with pedigree 0.0073, pedigree (3,4,4,3,2)
  properties: price 0.109 EUR2005

## Inputs from nature
- Water, river [natural resource, in water]: 0.611874 m3; lognormal variance with pedigree 0.0028, pedigree (3,1,4,1,1)
- Water, well, in ground [natural resource, in water]: 0.387289 m3; lognormal variance with pedigree 0.0028, pedigree (3,1,4,1,1)

## Sampling procedure
Literature values and estimations.

## Extrapolations
The material input are based on the FAO example of hose-move sprinkler irrigation design for cotton (FAO, 2007). The data on water sources, irrigation efficiency and energy demand is compiled based on different data sources, incluiding the Global Map of Irrigation Areas (GMIA), FAO-AQUASTAT libary, national census reports and other internacional organizations or statistical services.
