# iron sinter production

Dataset: EcoSpold 2, unit process
Geography: RoW
Time period: 2005-01-01 to 2022-12-31
Technology level: current
Classification: ISIC rev.4 ecoinvent: 2410:Manufacture of basic iron and steel
Scenario: Business-as-Usual
System model: Substitution, consequential, long-term
Share of production covered: 65 %
Generated by: Johannes Müller
Published in: Remus, R. 2013
Database: ecoinvent
isCopyrightProtected: true
accessRestrictedTo: 1

## General comment
"Background:
This activity produces iron sinter for use in the blast furnace. The goal of the sintering process is to improve the permeability and reducability of the blast furnace charge, a mixture of fine ores, coke breeze, additives (e.g. lime) and iron-bearing materials that are returned from downstream iron and steemaking operations. Raw materials are blended together in a mixing drum and then placed on a conveyor belt on top of a layer of recycled sinter. The sinter mixture is moved slowly along a continuously moving grate with acombustion front drawing downwards through the mixture, which sinters the fine particles together.
Modelling approach:
Data on were mostly taken from the IPPC Best Available Technology report from the European Commission (Remus et al., 2013); note that where only data ranges were provided, the geometric mean of reported values was used here. The amounts of iron-bearing materials returned from downstream activities are based on the amount of each respective material that is produced and sent for internal recycling according to worldsteel (2010). It should be noted that data on radionucleid emissions to air, e.g. of Pollonium 210 and Lead 210, were not available and have therefore not been inventoried here.
References:
Remus, R., Aguado-Monsonet, M. A., Roudier, S. & Samcho, L. D. (2013). JRC reference report - Best available techniques (BAT) reference document for iron and steel production. Joint Research Centre - European Commission, Luxemboug.
Worldsteel (2010). Steel industry by-products. World Steel Association: Brussels, Belgium."

## Included activities start
At the gate of the integrated sintering-blast furnace plant.

## Included activities end
With the mixed, sintered iron-bearing mixture being ready for charging in the blast furnace.

## Geography
Data are representative of the average sitaution in Europe, with the exception of the amounts of iron-bearing material returns, which are based on average global statistics.

## Technology
Represents average European technology; down draft sintering on continuous travelling grates.

## Time period
Data are mostly compiled from reports published between 2007 and 2010 but are considered representative of modern operations.

## Parameters
- calorific value coke: 26 MJ/kg
- calorific value natural gas: 49 MJ/kg
- fraction, process water, to air: 0.416667 dimensionless; name fraction_PW_to_air; lognormal variance with pedigree 0.092, pedigree (4,4,3,2,4)
  Literature value (Statistics Canada, 2007 & Shaffer, K.H., 2008, Consumptive water use in the Great Lakes Basin, USGS) (Vionnet, S., Quantis Water Database - Technical Report, 2012).

## Reference product
- iron sinter: 1 kg; By-product classification allocatable product; CPC 41116: Ferrous products obtained by direct reduction of iron ore and other spongy ferrous products, in lumps, pellets[…]
  production volume 1.16432e12 kg
  properties: carbon allocation 0 kg, carbon content 0, carbon content, fossil 0, carbon content, non-fossil 0, dry mass 0.948611 kg, iron content 0.609312, oxygen content 0.0980405, price 0.0590934 EUR2005, water content 0.0541726, water in wet mass 0.0513887 kg, wet mass 1 kg

## Inputs from technosphere
- aluminium oxide factory: 2.5e-11 unit; lognormal variance with pedigree 0.6052, pedigree (3,3,4,2,2)
- basic oxygen furnace dust, for recovery: 0.0085784 kg; lognormal variance with pedigree 0.005825, pedigree (3,3,4,2,2)
  properties: aluminium content 0.0116686, antimony content 0.0031031, calcium content 0.0539569, carbon content, fossil 0.0181399, dry mass 0.999 kg, iron content 0.508098, magnesium content 0.00813217, manganese content 0.0049049, oxygen content 0.0582582, silicon content 0.0112688, wet mass 1 kg, zinc content 0.00714132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
- basic oxygen furnace secondary metallurgy slag, for recovery: 4.7875e-5 kg; lognormal variance with pedigree 0.005825, pedigree (3,3,4,2,2)
  properties: aluminium content 0.0545631, calcium content 0.300972, dry mass 0.995 kg, iron content 0.037569, magnesium content 0.0589936, manganese content 0.00644081, oxygen content 0.28181, silicon content 0.0704991, sulfur content 0.00550137, titanium content 0.00232752, water content 0.00502513, wet mass 1 kg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
- basic oxygen furnace slag, for recovery: 0.0120243 kg; lognormal variance with pedigree 0.005825, pedigree (3,3,4,2,2)
  properties: aluminium content 0.0104664, calcium content 0.326191, dry mass 0.995 kg, iron content 0.180908, magnesium content 0.035158, manganese content 0.0246772, oxygen content 0.283288, phosphorus content 0.0103006, silicon content 0.0633675, titanium content 0.00562987, vanadium content 0.00617113, wet mass 1 kg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
- basic oxygen furnace sludge, for recovery: 0.00013429 kg; lognormal variance with pedigree 0.005825, pedigree (3,3,4,2,2)
  properties: aluminium content 0.00224181, calcium content 0.0202279, carbon content, fossil 0.00588235, dry mass 0.68 kg, iron content 0.608767, magnesium content 0.00196609, manganese content 0.00169783, oxygen content 0.0208176, silicon content 0.00570528, water content 0.470588, wet mass 1 kg, zinc content 0.0109474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
- blast furnace dust: -0.000789204 kg; lognormal variance with pedigree 0.005825, pedigree (3,3,3,2,2)
  properties: aluminium content 0.0112796, calcium content 0.0233333, carbon content, fossil 0.344336, dry mass 0.999 kg, iron content 0.309177, magnesium content 0.00820361, manganese content 0.00213301, oxygen content 0.257407, potassium content 0.00371216, silicon content 0.029133, sulfur content 0.0045155, wet mass 1 kg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
- blast furnace dust, for recovery: 0.00585357 kg; lognormal variance with pedigree 0.005825, pedigree (3,3,4,2,2)
  properties: aluminium content 0.0112073, calcium content 0.0235367, carbon content, fossil 0.333753, dry mass 0.999 kg, heating value, net 10.1 MJ, iron content 0.309426, magnesium content 0.00830012, oxygen content 0.0990808, potassium content 0.00379144, silicon content 0.0299096, sulfur content 0.00452002, wet mass 1 kg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
- blast furnace sludge: -0.00145725 kg; lognormal variance with pedigree 0.005825, pedigree (3,3,3,2,2)
  properties: aluminium content 0.0110581, calcium content 0.0359238, carbon content, fossil 0.304046, dry mass 0.68 kg, iron content 0.193985, magnesium content 0.0145544, oxygen content 0.159046, silicon content 0.0279247, sulfur content 0.00689046, water content 0.470588, wet mass 1 kg, zinc content 0.0102173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
- blast furnace sludge, for recovery: 0.00423477 kg; lognormal variance with pedigree 0.005825, pedigree (3,3,4,2,2)
  properties: aluminium content 0.0162734, calcium content 0.0528292, carbon content, fossil 0.304046, dry mass 0.68 kg, heating value, net 5.48 MJ, iron content 0.285273, magnesium content 0.0214018, oxygen content 0.1123, silicon content 0.0410655, water content 0.470588, wet mass 1 kg, zinc content 0.0150255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
- coke: 1.2766 MJ; lognormal variance with pedigree 0.005825, pedigree (3,3,4,2,2)
  properties: carbon content, fossil 0.8786, dry mass 0.034965 kg, heating value, net 28.6 MJ, iron content 0.0234, oxygen content 0.0942, wet mass 0.034965 kg
- compressed air, 800 kPa gauge: 0.00189737 m3; lognormal variance with pedigree 0.005825, pedigree (3,3,4,2,2)
  properties: oxygen content 0.21
- electric arc furnace secondary metallurgy slag, for recovery: 0.00120284 kg; lognormal variance with pedigree 0.005825, pedigree (3,3,4,2,2)
  properties: aluminium content 0.0545631, calcium content 0.300972, dry mass 0.995 kg, iron content 0.037569, magnesium content 0.0589936, manganese content 0.00644081, oxygen content 0.28181, silicon content 0.0704991, sulfur content 0.00550137, titanium content 0.00232752, water content 0.00502513, wet mass 1 kg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
- electric arc furnace slag, for recovery: 0.00149958 kg; lognormal variance with pedigree 0.005825, pedigree (3,3,4,2,2)
  properties: aluminium content 0.0432161, calcium content 0.244221, chromium content 0.0116583, dry mass 0.995 kg, fluorine content 0.0201005, iron content 0.098593, magnesium content 0.0431156, manganese content 0.0244221, oxygen content 0.400947, silicon content 0.0912563, water content 0.00502513, wet mass 1 kg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
- electricity, medium voltage: 0.000499904, 0.000949977, 0.000567685, 0.0142452, 1.14314e-5, 5.4482e-5, 6.39726e-5, 1.65959e-5, 0.00384418, 0.000128631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 kWh (44 suppliers, which the file names only by identifier); sum of these 0.034 kWh; lognormal variance with pedigree 0.005825, pedigree (3,3,4,2,2)
- iron ore concentrate: 0.878809 kg; lognormal variance with pedigree 0.005825, pedigree (3,3,4,2,2)
  properties: carbon content, fossil 0.0132497, dry mass 0.96127 kg, iron content 0.671308, oxygen content 1.72657, water content 0.0402903, wet mass 1 kg
- lime, hydrated, loose weight: 0.0264 kg; lognormal variance with pedigree 0.005825, pedigree (3,3,4,2,2)
  properties: dry mass 0.997 kg, water content 0.00300903, wet mass 1 kg
- limestone, unprocessed: 0.1311 kg; lognormal variance with pedigree 0.005825, pedigree (3,3,4,2,2)
  properties: carbon content, fossil 0.1303, dry mass 1 kg, iron content 0.0014, oxygen content 0.479565, wet mass 1 kg
- natural gas, high pressure: 0.000112408, 2.32639e-5, 2.15655e-5, 6.07333e-6, 4.66823e-5, 1.34128e-5, 8.54383e-6, 9.3416e-6, 5.66158e-6, 6.69096e-6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 m3 (24 suppliers, which the file names only by identifier); sum of these 0.00162779 m3; lognormal variance with pedigree 0.005825, pedigree (3,3,4,2,2)
  properties: carbon content, fossil 0.69638, dry mass 0.84 kg, heating value, net 36 MJ, oxygen content 0.0064711, wet mass 0.84 kg
- quicklime, in pieces, loose: 0.0102 kg; lognormal variance with pedigree 0.005825, pedigree (3,3,4,2,2)
  properties: dry mass 1 kg, iron content 0.004, oxygen content 0.285309, wet mass 1 kg
- wastewater from pig iron production: -4.24264e-5 m3; lognormal variance with pedigree 0.005825, pedigree (3,3,3,2,2)
  properties: carbon content, fossil 1.2149e-5, dry mass 0.337476 kg, oxygen content 2631.59, water content 2962.17, wet mass 1000 kg

## Inputs from nature
- Oxygen [natural resource, in air]: 0.118231 kg; lognormal variance with pedigree 0.005825, pedigree (3,3,4,2,2)
- Water, unspecified natural origin [natural resource, in water]: 5.91608e-5 m3; lognormal variance with pedigree 0.005825, pedigree (3,3,4,2,2)

## Emissions to nature
- Arsenic ion [air, unspecified]: 3e-9 kg; lognormal variance with pedigree 0.6552, pedigree (3,3,4,2,2)
- Benzo(a)pyrene [air, unspecified]: 2.03715e-9 kg; lognormal variance with pedigree 0.3052, pedigree (3,3,4,2,2)
- Cadmium II [air, unspecified]: 7.43909e-9 kg; lognormal variance with pedigree 0.6552, pedigree (3,3,4,2,2)
- Carbon dioxide, fossil [air, unspecified]: 0.243812 kg; lognormal variance with pedigree 0.005825, pedigree (3,3,4,2,2)
- Carbon monoxide, fossil [air, unspecified]: 0.018027 kg; lognormal variance with pedigree 0.6552, pedigree (3,3,4,2,2)
- Chromium III [air, unspecified]: 2.12217e-8 kg; lognormal variance with pedigree 0.6552, pedigree (3,3,4,2,2)
- Copper ion [air, unspecified]: 3.3778e-8 kg; lognormal variance with pedigree 0.6552, pedigree (3,3,4,2,2)
- Dioxins, measured as 2,3,7,8-tetrachlorodibenzo-p-dioxin [air, unspecified]: 1.55e-12 kg; lognormal variance with pedigree 0.6552, pedigree (3,3,4,2,2)
- Hydrochloric acid [air, unspecified]: 3.44476e-5 kg; lognormal variance with pedigree 0.04523, pedigree (3,3,4,2,2)
- Hydrogen fluoride [air, unspecified]: 1.81108e-6 kg; lognormal variance with pedigree 0.04523, pedigree (3,3,4,2,2)
- Lead II [air, unspecified]: 3.84392e-7 kg; lognormal variance with pedigree 0.6552, pedigree (3,3,4,2,2)
- Manganese II [air, unspecified]: 4.28248e-8 kg; lognormal variance with pedigree 0.6552, pedigree (3,3,4,2,2)
- Mercury II [air, unspecified]: 4.54973e-9 kg; lognormal variance with pedigree 0.6552, pedigree (3,3,4,2,2)
- Methane, fossil [air, unspecified]: 0.000121011 kg; lognormal variance with pedigree 0.04523, pedigree (3,3,4,2,2)
- NMVOC, non-methane volatile organic compounds [air, unspecified]: 1.97826e-5 kg; lognormal variance with pedigree 0.04523, pedigree (3,3,4,2,2)
- Nickel II [air, unspecified]: 1.51089e-8 kg; lognormal variance with pedigree 0.6552, pedigree (3,3,4,2,2)
- Nitrogen oxides [air, unspecified]: 0.000558145 kg; lognormal variance with pedigree 0.04523, pedigree (3,3,4,2,2)
- PAH, polycyclic aromatic hydrocarbons [air, unspecified]: 1.08784e-8 kg; lognormal variance with pedigree 0.3052, pedigree (3,3,4,2,2)
- Particulate Matter, < 2.5 um [air, unspecified]: 0.000120415 kg
- Particulate Matter, > 10 um [air, unspecified]: 9.37758e-5 kg; lognormal variance with pedigree 0.04523, pedigree (3,3,4,2,2)
- Particulate Matter, > 2.5 um and < 10um [air, unspecified]: 1.96025e-5 kg; lognormal variance with pedigree 0.1252, pedigree (3,3,4,2,2)
- Polychlorinated biphenyls [air, unspecified]: 6.60379e-11 kg; lognormal variance with pedigree 0.04523, pedigree (3,3,4,2,2)
- Selenium IV [air, unspecified]: 5.12533e-8 kg; lognormal variance with pedigree 0.6552, pedigree (3,3,4,2,2)
- Sulfur dioxide [air, unspecified]: 0.000462632 kg; lognormal variance with pedigree 0.005825, pedigree (3,3,4,2,2)
- Titanium ion [air, unspecified]: 6.58027e-9 kg; lognormal variance with pedigree 0.6552, pedigree (3,3,4,2,2)
- Vanadium V [air, unspecified]: 9.75192e-9 kg; lognormal variance with pedigree 0.6552, pedigree (3,3,4,2,2)

## Sampling procedure
Most data were taken from direct measurements at five sinter plants in Europe; data on the amounts of iron-bearing return materials based on measured data from plants worldwide.

## Extrapolations
see Geography
