# concrete mixing factory construction

Dataset: EcoSpold 2, unit process
Geography: RoW
Time period: 1997-01-01 to 2022-12-31
Technology level: current
Classification: EcoSpold01Categories: construction materials/others
Classification: ISIC rev.4 ecoinvent: 4290:Construction of other civil engineering projects
Tags: ConvertedDataset
Scenario: Business-as-Usual
System model: Substitution, consequential, long-term
Generated by: Daniel Kellenberger (obsolete)
Published in: Kellenberger D. 2007
Database: ecoinvent
isCopyrightProtected: true
accessRestrictedTo: 1

## General comment
The lifespan of the insfrastructure and the land occupation is assumed to be 50 years. The average yearly production is about 100'000 t/a
[This dataset was already contained in the ecoinvent database version 2. It was not individually updated during the transfer to ecoinvent version 3. Life Cycle Impact Assessment results may still have changed, as they are affected by changes in the supply chain, i.e. in other datasets. This dataset was generated following the ecoinvent quality guidelines for version 2. It may have been subject to central changes described in the ecoinvent version 3 change report (http://www.ecoinvent.org/database/ecoinvent-version-3/reports-of-changes/), and the results of the central updates were reviewed extensively. The changes added e.g. consistent water flows and other information throughout the database. The documentation of this dataset can be found in the ecoinvent reports of version 2, which are still available via the ecoinvent website. The change report linked above covers all central changes that were made during the conversion process.]

## Included activities end
includes the area of the infrastructure (buildings, roads, etc.) and the machines used for the ready-mixed concrete production

## Geography
For some exchanges RER-modules have been used as proxy

## Technology
The data of the infrastructure corresponds tohigh level of technology

## Reference product
- concrete mixing factory: 1 unit; By-product classification allocatable product; CPC 53269: Other constructions for manufacturing
  production volume 3.96633 unit
  properties: carbon allocation 0 kg, carbon content 0, price 1.25016e6 EUR2005

## Inputs from technosphere
- building, hall, steel construction: 1400 m2; lognormal variance with pedigree 0.332, pedigree (3,5,5,5,1)
- building, multi-storey: 7190 m3; lognormal variance with pedigree 0.332, pedigree (3,5,5,5,1)
- conveyor belt: 750 m; lognormal variance with pedigree 0.332, pedigree (3,5,5,5,1)
- industrial machine, heavy, unspecified: 160000 kg; lognormal variance with pedigree 0.332, pedigree (3,5,5,5,1)

## Inputs from nature
- Occupation, industrial area [natural resource, land]: 217900 m2*year; lognormal variance with pedigree 0.0632, pedigree (2,3,5,5,1)
- Occupation, traffic area, road network [natural resource, land]: 150000 m2*year; lognormal variance with pedigree 0.0632, pedigree (2,3,5,5,1)
- Transformation, from unspecified [natural resource, land]: 7370 m2; lognormal variance with pedigree 0.1432, pedigree (2,3,5,5,1)
- Transformation, to industrial area [natural resource, land]: 4370 m2; lognormal variance with pedigree 0.1432, pedigree (2,3,5,5,1)
- Transformation, to traffic area, road network [natural resource, land]: 3010 m2; lognormal variance with pedigree 0.1432, pedigree (2,3,5,5,1)

## Sampling procedure
Measured data of 6 Swiss plants

## Extrapolations
See geography This dataset has been copied from an original dataset covering the geography CH. The uncertainty has been adjusted accordingly.

## Review by Roberto Dones 2003-07-04
Passed
