# transport, passenger car with internal combustion engine

Dataset: EcoSpold 2, unit process
Geography: RER
Time period: 2012-01-01 to 2022-12-31
Technology level: current
Classification: ISIC rev.4 ecoinvent: 4922:Other passenger land transport
Tags: internal combustion engine
Scenario: Business-as-Usual
System model: Substitution, consequential, long-term
Generated by: Sofia Parada Tur
Database: ecoinvent
isCopyrightProtected: true
accessRestrictedTo: 1

## General comment
This activity provides an average transport in a passenger car with internal combustion engine. This is a linking activity, linking specific "transport, passenger car" in the EURO classes 3, 4 and 5 into a generic product.

## Included activities end
This activity provides an average transport in passenger car with internal combustion engine.

## Technology
Average transport in a passenger car with internal combustion engine. The average takes into account different car classes (EURO 3, EURO 4 and EURO 5). These at its turn, are an average of the different car sizes (small, medium and large) and fuel types (petrol, diesel and natural gas) for each EURO category.

## Parameters
- production volumes sum: 2.44645e12 km; name PV_sum; = 1.0348E+12 + 7.9683E+11 + 6.1482E+11; lognormal variance with pedigree 0.0026, pedigree (3,1,1,1,1)
  sum of the production volumes of the input exchanges in the present inventory. Values obtained from the ecoinvent datasets that produce these inputs as reference products.

## Reference product
- transport, passenger car with internal combustion engine: 1 km; By-product classification allocatable product; CPC 64119: Other land transportation services of passengers, n.e.c.
  production volume 2.44645e12 km
  properties: carbon allocation 0 kg, carbon content 0, price 0.158709 EUR2005

## Inputs from technosphere
- transport, passenger car, EURO 3: 0.42298 km; lognormal variance with pedigree 0.0026, pedigree (3,1,4,1,1)
- transport, passenger car, EURO 4: 0.325709 km; lognormal variance with pedigree 0.0026, pedigree (3,1,4,1,1)
- transport, passenger car, EURO 5: 0.251311 km; lognormal variance with pedigree 0.0026, pedigree (3,1,4,1,1)
