# petrol production, 5% ethanol by volume from biomass

Dataset: EcoSpold 2, unit process
Geography: CH
Time period: 2004-01-01 to 2022-12-31
Technology level: current
Classification: EcoSpold01Categories: oil/fuels
Classification: ISIC rev.4 ecoinvent: 1920:Manufacture of refined petroleum products
Synonyms: algrain; Ethyl alcohol; Ethanol; cologne spirits (alcohol); cologne spirit; ethyl hydroxide; Denatured alcohol; bioethanol; ethanol 200 proof; Ethanol absolute; fermentation alcohol; E5; grain alcohol; bio-ethanol; Anhydrol; ethyl hydrate; alcohol dehydrated; Alkohol
Tags: ConvertedDataset
Scenario: Business-as-Usual
System model: Substitution, consequential, long-term
Share of production covered: 0 %
Generated by: Edgard Gnansounou
Published in: Jungbluth N. 2007
Database: ecoinvent
isCopyrightProtected: true
accessRestrictedTo: 1

## General comment
Inventory refers to the distribution of 1 kg of E5 (95% vol. low-sulphur gasoline blended with 5% vol. anhydrous ethanol from biomass). Ethanol is partly produced in CH (according to the production mix), and partly imported from RER and BR. Distribution to the final consumer (service station) including all necessary transports. Fossil and biogenic carbon contents are respectively 82.0% and 2.7%.
[This dataset was already contained in the ecoinvent database version 2. It was not individually updated during the transfer to ecoinvent version 3. Life Cycle Impact Assessment results may still have changed, as they are affected by changes in the supply chain, i.e. in other datasets. This dataset was generated following the ecoinvent quality guidelines for version 2. It may have been subject to central changes described in the ecoinvent version 3 change report (http://www.ecoinvent.org/database/ecoinvent-version-3/reports-of-changes/), and the results of the central updates were reviewed extensively. The changes added e.g. consistent water flows and other information throughout the database. The documentation of this dataset can be found in the ecoinvent reports of version 2, which are still available via the ecoinvent website. The change report linked above covers all central changes that were made during the conversion process.]

## Included activities end
This process includes the distribution of E5 (95% vol. low-sulphur gasoline and 5% vol. anhydrous ethanol from biomass) to the end user at the filling station. Operation of storage tanks and petrol stations are taken into account. Emissions from evaporation and treatment of effluents are also included. Excluding emissions from car-washing at petrol stations. Mixing is supposed to be performed directly at the filling station (splash blending).

## Geography
The ethanol component is partly produced in Switzerland (25%) and partly imported from the EU (37.5%) and from Brazil (37.5%). The gasoline component corresponds to low-sulphur gasoline used in Switzerland.

## Technology
Distribution of fuels

## Reference product
- petrol, 5% ethanol by volume from biomass: 1 kg; By-product classification allocatable product; CPC 333: Petroleum oils and oils obtained from bituminous materials, other than crude; preparations n.e.c. containing by […]
  production volume 1 kg
  properties: carbon allocation 0.847 kg, carbon content 0.847, carbon content, fossil 0.82, carbon content, non-fossil 0.027, dry mass 1 kg, heating value, net 41.7 MJ, price 0.71 EUR2005, water content 0, water in wet mass 0 kg, wet mass 1 kg

## Inputs from technosphere
- ethanol, without water, in 99.7% solution state, from fermentation, vehicle grade: 0.052842 kg; lognormal variance with pedigree 0.0101, pedigree (1,2,5,1,1)
  properties: carbon content, non-fossil 0.521739, dry mass 1 kg, heating value, net 28.1 MJ, wet mass 1 kg
- petrol, low-sulfur: 0.94716 kg; lognormal variance with pedigree 0.0101, pedigree (1,2,5,1,1)
  properties: carbon content, fossil 0.865, dry mass 1 kg, heating value, net 42.5 MJ, wet mass 1 kg

## Sampling procedure
Environmental reports and literature.

## Review by Niels Jungbluth 2006-07-12
Passed.
none
