# bitumen adhesive compound production, cold

Dataset: EcoSpold 2, unit process
Geography: RoW
Time period: 1994-01-01 to 2022-12-31
Technology level: current
Classification: EcoSpold01Categories: plastics/others
Classification: ISIC rev.4 ecoinvent: 2399:Manufacture of other non-metallic mineral products n.e.c.
Synonyms: cold bonding compound, Kaltkleber
Tags: ConvertedDataset
Scenario: Business-as-Usual
System model: Substitution, consequential, long-term
Generated by: Martin Lehmann
Published in: Kellenberger D. 2007
Database: ecoinvent
isCopyrightProtected: true
accessRestrictedTo: 1

## General comment
The dataset is applicable in the construction building sector. Bitumen adhesive compound is used to protect roads and roofs against water intrusion.
[This dataset was already contained in the ecoinvent database version 2. It was not individually updated during the transfer to ecoinvent version 3. Life Cycle Impact Assessment results may still have changed, as they are affected by changes in the supply chain, i.e. in other datasets. This dataset was generated following the ecoinvent quality guidelines for version 2. It may have been subject to central changes described in the ecoinvent version 3 change report (http://www.ecoinvent.org/database/ecoinvent-version-3/reports-of-changes/), and the results of the central updates were reviewed extensively. The changes added e.g. consistent water flows and other information throughout the database. The documentation of this dataset can be found in the ecoinvent reports of version 2, which are still available via the ecoinvent website. The change report linked above covers all central changes that were made during the conversion process.]

## Included activities end
The dataset describes the production of cold bitumen adhesive compound. Included sub-processes are the mixing of bitumen and solvent, the infrastructure, the transport by road and rail as well as the disposal of the compound cuttings in a hazardous waste municipal incineration.

## Geography
The data of this dataset is extracted from literature and producer information. Some own calculations (e.g. energy input, waste heat) were made.

## Technology
The technology involved is mixing of bitumen and solvent in a cold process.

## Parameters
- fraction, process water, to air: 0.5 dimensionless; name fraction_PW_to_air; lognormal variance with pedigree 0.092025, pedigree (4,4,3,2,4)
  Literature value (Statistics Canada, 2007 & Shaffer, K.H., 2008, Consumptive water use in the Great Lakes Basin, USGS) (Vionnet, S., Quantis Water Database - Technical Report, 2012).
- fraction, water, deionised, to air: 0.5 dimensionless; name fraction_WDI_to_air; = fraction_PW_to_air; lognormal variance with pedigree 0.092025, pedigree (4,4,3,2,4)
  Calculated value. See comment in the other parametres present in this dataset. Deionised water is considered to be always used as process water, thus process water fractions to air are applied to all deionised water input flows to calculate the amount of water consumed in the processes.

## Reference product
- bitumen adhesive compound, cold: 1 kg; By-product classification allocatable product; CPC 37940: Bituminous mixtures based on natural and artificial stone materials and bitumen, natural asphalt or related su[…]
  production volume 2.67763 kg
  properties: carbon allocation 0.37726 kg, carbon content 0.762141, carbon content, fossil 0.762141, carbon content, non-fossil 0, dry mass 0.495 kg, heating value, net 10.19 MJ, price 0.247821 EUR2005, water content 1.0202, water in wet mass 0.505 kg, wet mass 1 kg

## Inputs from technosphere
- chemical factory, organics: 4e-11 unit; lognormal variance with pedigree 0.3146, pedigree (2,4,5,5,1)
- chemical, organic: 0.0808 kg; lognormal variance with pedigree 0.0146, pedigree (2,4,5,5,1)
  properties: carbon content, fossil 0.628, dry mass 1 kg, heating value, net 19.03 MJ, wet mass 1 kg
- electricity, medium voltage: 0.00762386, 0.000285248, 0.00362417, 0.0629019, 0.00528172, 0.000283097 kWh (6 suppliers, which the file names only by identifier); sum of these 0.08 kWh; lognormal variance with pedigree 0.0132, pedigree (2,3,5,5,1)
- hazardous waste, for incineration: -0.0098 kg; lognormal variance with pedigree 0.0346, pedigree (2,4,3,5,3)
  properties: carbon content, fossil 0.554667, dry mass 0.75 kg, heating value, net 17 MJ, water content 0.333333, wet mass 1 kg
- pitch: 0.00247343, 0.0012192, 0.0213926, 0.00180512, 0.0551808, 0.311929 kg (6 suppliers, which the file names only by identifier); sum of these 0.394 kg; lognormal variance with pedigree 0.0146, pedigree (2,4,5,5,1)
  properties: carbon content, fossil 0.83, dry mass 1 kg, heating value, net 28 MJ, wet mass 1 kg
- water, deionised: 0.505 kg; lognormal variance with pedigree 0.0146, pedigree (2,4,5,5,1)
  properties: wet mass 1 kg

## Emissions to nature
- NMVOC, non-methane volatile organic compounds [air, unspecified]: 0.04 kg; lognormal variance with pedigree 0.16, pedigree (4,4,5,5,3)
- Water [air, unspecified]: 0.0002525 m3; lognormal variance with pedigree 0.0427, pedigree (2,2,5,5,1)
- Water [water, unspecified]: 0.0002525 m3; lognormal variance with pedigree 0.0427, pedigree (2,2,5,5,1)

## Sampling procedure
Literature, database

## Extrapolations
see Geography This dataset has been copied from an original dataset covering the geography RER. The uncertainty has been adjusted accordingly.

## Review by Rolf Frischknecht 2007-11-07
passed
