# building construction, hall, wood construction

Dataset: EcoSpold 2, unit process
Geography: RoW
Time period: 2000-01-01 to 2022-12-31
Technology level: current
Classification: ISIC rev.4 ecoinvent: 4100:Construction of buildings
Classification: EcoSpold01Categories: construction processes/buildings
Tags: ConvertedDataset
Scenario: Business-as-Usual
System model: Substitution, consequential, long-term
Generated by: Daniel Kellenberger (obsolete)
Published in: Kellenberger D. 2007
Database: ecoinvent
isCopyrightProtected: true
accessRestrictedTo: 1

## General comment
The module is based on a fictitious building hall with size: length 50 m, width 30 m, height 7 m, daylight opening 110 m2. The service life is assumed to be 50 years. This module should not be used if its relative importance would be high in a certain environmental inventory.
[This dataset was already contained in the ecoinvent database version 2. It was not individually updated during the transfer to ecoinvent version 3. Life Cycle Impact Assessment results may still have changed, as they are affected by changes in the supply chain, i.e. in other datasets. This dataset was generated following the ecoinvent quality guidelines for version 2. It may have been subject to central changes described in the ecoinvent version 3 change report (http://www.ecoinvent.org/database/ecoinvent-version-3/reports-of-changes/), and the results of the central updates were reviewed extensively. The changes added e.g. consistent water flows and other information throughout the database. The documentation of this dataset can be found in the ecoinvent reports of version 2, which are still available via the ecoinvent website. The change report linked above covers all central changes that were made during the conversion process.]

## Included activities end
Includes the most important materials used and their disposal, the transportation of the parts to the building site and to the final disposal at the end of life. Also included is the requirement of electricity for construction, maintenance and demolition. Operation is not included.

## Geography
Certain elementary flows or intermediate product flows are RER or GLO modules

## Technology
Example representing current wooden industrial structures in Switzerland

## Reference product
- building, hall, wood construction: 1 m2; By-product classification allocatable product; CPC 531: Buildings
  production volume 3.96633 m2
  properties: carbon allocation 0 kg, carbon content 0, price 151.877 EUR2005

## Inputs from technosphere
- aluminium, wrought alloy: 3 kg; lognormal variance with pedigree 0.248, pedigree (4,5,5,5,5)
  properties: dry mass 1 kg, wet mass 1 kg
- concrete, normal strength: 0.00743242, 0.000774448, 0.000672649, 0.000503735, 0.0149346, 0.00352671, 0.265886, 0.0062697 m3 (8 suppliers, which the file names only by identifier); sum of these 0.3 m3; lognormal variance with pedigree 0.248, pedigree (4,5,5,5,5)
  properties: dry mass 2190 kg, water content 0.086758, wet mass 2380 kg
- diesel, burned in building machine: 238 MJ; lognormal variance with pedigree 0.248, pedigree (4,5,5,5,5)
  properties: heating value, net 1 MJ
- electricity, medium voltage: 0.898601, 0.1664, 0.0336213, 0.42717, 0.904246, 7.41405, 0.62254, 0.0333678 kWh (8 suppliers, which the file names only by identifier); sum of these 10.5 kWh; lognormal variance with pedigree 0.248, pedigree (4,5,5,5,5)
- flat glass, uncoated: 4.5 kg; lognormal variance with pedigree 0.248, pedigree (4,5,5,5,5)
  properties: dry mass 1 kg, wet mass 1 kg
- glued laminated timber, average glue mix: 0.034233, 0.015767 m3 (2 suppliers, which the file names only by identifier); sum of these 0.05 m3; lognormal variance with pedigree 0.248, pedigree (4,5,5,5,5)
  properties: carbon content, fossil 0.01791, carbon content, non-fossil 0.441932, dry mass 404.4 kg, heating value, net 5537.41 MJ, price 298 EUR2005, water content 0.0979228, wet mass 444 kg
- particleboard, uncoated: 0.03 m3; lognormal variance with pedigree 0.248, pedigree (4,5,5,5,5)
  properties: carbon content, fossil 0.045339, carbon content, non-fossil 0.4416, dry mass 599.3 kg, heating value, net 8749.71 MJ, water content 0.0629067, wet mass 637 kg
- polystyrene foam slab: 5.4 kg; lognormal variance with pedigree 0.248, pedigree (4,5,5,5,5)
  properties: carbon content, fossil 0.859091, dry mass 1 kg, heating value, net 38.67 MJ, wet mass 1 kg
- reinforcing steel: 13.2 kg; lognormal variance with pedigree 0.248, pedigree (4,5,5,5,5)
  properties: carbon content, fossil 0.004, dry mass 1 kg, wet mass 1 kg
- sawnwood, softwood, dried (u=10%), planed: 0.006 m3; lognormal variance with pedigree 0.248, pedigree (4,5,5,5,5)
  properties: carbon content, non-fossil 0.494, dry mass 450 kg, heating value, net 6625.26 MJ, water content 0.1, wet mass 495 kg
- sawnwood, softwood, raw, dried (u=10%): 0.105 m3; lognormal variance with pedigree 0.248, pedigree (4,5,5,5,5)
  properties: carbon content, non-fossil 0.494, dry mass 450 kg, heating value, net 7227.56 MJ, water content 0.2, wet mass 540 kg
- sheet rolling, steel: 13.2 kg; lognormal variance with pedigree 0.248, pedigree (4,5,5,5,5)
- stone wool, packed: 13.2 kg; lognormal variance with pedigree 0.248, pedigree (4,5,5,5,5)
  properties: carbon content, fossil 0.015401, dry mass 1 kg, wet mass 1 kg
- waste bulk iron, excluding reinforcement: -4.28648, -8.91352 kg (2 suppliers, which the file names only by identifier); sum of these -13.2 kg; lognormal variance with pedigree 0.248, pedigree (4,5,1,5,5)
  properties: dry mass 1 kg, wet mass 1 kg
- waste fibreboard: -59.2 kg; lognormal variance with pedigree 0.248, pedigree (4,5,1,5,5)
  properties: carbon content, fossil 0.0731794, carbon content, non-fossil 0.439195, dry mass 0.84245 kg, heating value, net 12.69 MJ, water content 0.187014, wet mass 1 kg
- waste glass sheet: -0.927191, -3.57281 kg (2 suppliers, which the file names only by identifier); sum of these -4.5 kg; lognormal variance with pedigree 0.248, pedigree (4,5,1,5,5)
  properties: dry mass 1 kg, wet mass 1 kg
- waste mineral wool: -3.83878, -9.36122 kg (2 suppliers, which the file names only by identifier); sum of these -13.2 kg; lognormal variance with pedigree 0.248, pedigree (4,5,1,5,5)
  properties: dry mass 1 kg, wet mass 1 kg
- waste polystyrene isolation, flame-retardant: -1.52752, -3.87248 kg (2 suppliers, which the file names only by identifier); sum of these -5.4 kg; lognormal variance with pedigree 0.248, pedigree (4,5,1,5,5)
  properties: carbon content, fossil 0.918145, dry mass 0.998012 kg, heating value, net 38.67 MJ, water content 0.00199232, wet mass 1 kg
- waste reinforced concrete: -700.89, -49.1103 kg (2 suppliers, which the file names only by identifier); sum of these -750 kg; lognormal variance with pedigree 0.248, pedigree (4,5,1,5,5)
  properties: dry mass 0.99418 kg, water content 0.00585407, wet mass 1 kg
- waste wood, untreated: -0.256032, -4.85953, -64.4711, -0.603384, -0.404765, -7.56634, -1.69472, -0.0441141 kg (8 suppliers, which the file names only by identifier); sum of these -79.9 kg; lognormal variance with pedigree 0.248, pedigree (4,5,1,5,5)
  properties: carbon content, non-fossil 0.48632, dry mass 0.8 kg, heating value, net 13.99 MJ, water content 0.25, wet mass 1 kg
- zinc coat, coils: 5.97 m2; lognormal variance with pedigree 0.248, pedigree (4,5,5,5,5)

## Sampling procedure
most data obtained by personal communication

## Extrapolations
See geography This dataset has been copied from an original dataset covering the geography CH. The uncertainty has been adjusted accordingly.

## Review by Roberto Dones 2003-09-15
passed
