# sodium borate mine operation and beneficiation

Dataset: EcoSpold 2, unit process
Geography: RoW
Time period: 2005-01-01 to 2022-12-31
Technology level: current
Classification: EcoSpold01Categories: chemicals/inorganics
Classification: ISIC rev.4 ecoinvent: 0891:Mining of chemical and fertilizer minerals
Scenario: Business-as-Usual
System model: Substitution, consequential, long-term
Generated by: Eleonora Crenna
Published in: Allard, G. 2013
Database: ecoinvent
isCopyrightProtected: true
accessRestrictedTo: 1

## General comment
This dataset represents the production of 1 kg of sodium borate from borax (also called tincal), a naturally occurring mineral containing boron in form of B2O3. After being extracted from open pit sites and crushed, the ores are
dissolved in water and screened to separate the resulting insolubles from the solution. Sodium borate is especially used in household products, such as detergents and disinfectant. This dataset consider the production of sodium borate occurring at global scale and is an extrapolation of the respective geography US.
[This dataset is meant to replace the following datasets:
- sodium borates production, GLO, 2000 - 2000]

## Included activities start
The activity starts with the mining of borax (Na2B4O7*10H2O) from the ground.

## Included activities end
The activity ends with the production of sodium borate (anhydrous).

## Geography
Data used are assumed to represent global conditions.

## Technology
Sodium borates are obtained from surface mining of borax (Na2B4O7 * 10H2O) deposits, also called tincal. Open pit mining requires drilling and blasting to reach load deposits. Ores are removed from the mine and transported to milling and beneficiating plants for concentrating the ore. After being crushed, the ores are
dissolved in water and screened to separate the resulting insolubles from the solution. The crystals of sodium borate are dried from the solution and can either be sold as anhydrous borax or treated further to produce other borate materials.
References:
US EPA. Archive document - Boron. Available at: https://archive.epa.gov/pesticides/reregistration/web/pdf/0024fact.pdf
US Borax, 2019. Boron operations brochure. Available at: https://www.borax.com/BoraxCorp/media/Borax-Main/Resources/Brochures/boron-operations.pdf

## Time period
date of published literature

## Reference product
- sodium borates: 1 kg; By-product classification allocatable product; CPC 16190: Other chemical minerals
  production volume 4.89048e9 kg
  properties: boron content 0.128242, carbon allocation 0 kg, carbon content 0, carbon content, fossil 0, carbon content, non-fossil 0, dry mass 1 kg, price 0.0158256 EUR2005, water content 0, water in wet mass 0 kg, wet mass 1 kg

## Inputs from technosphere
- blasting: 0.000271 kg; lognormal variance with pedigree 0.2706, pedigree (4,3,5,5,5)
- conveyor belt: 2.78e-8 m; lognormal variance with pedigree 0.5806, pedigree (4,3,5,5,5)
- diesel, burned in building machine: 0.226995 MJ; lognormal variance with pedigree 0.0532, pedigree (4,4,5,5,2)
- electricity, medium voltage: 0.0166164, 0.00307698, 0.000621706, 0.00789898, 0.137097, 0.000617018, 0.00254414, 0.0169698 kWh (8 suppliers, which the file names only by identifier); sum of these 0.185442 kWh; lognormal variance with pedigree 0.0532, pedigree (4,4,5,5,2)
- heat, district or industrial, natural gas: 3.36576 MJ; lognormal variance with pedigree 0.0532, pedigree (4,4,5,5,2)
- mine infrastructure, open cast, non-ferrous metal: 7.79171e-11 unit; lognormal variance with pedigree 0.05063, pedigree (4,4,5,2,1)
- non-sulfidic tailing, off-site: -0.777631 kg; lognormal variance with pedigree 0.0532, pedigree (4,4,5,5,2)
  properties: dry mass 0.7 kg, water content 0.428571, wet mass 1 kg
- recultivation, iron mine: 9.42e-5 m2; lognormal variance with pedigree 0.4006, pedigree (4,3,5,5,5)
- wastewater, average: -0.000310441, -7.80184e-6, -0.00129826, -4.62231e-6 m3 (4 suppliers, which the file names only by identifier); sum of these -0.00162113 m3; lognormal variance with pedigree 0.1786, pedigree (4,5,5,5,5)
  properties: carbon content, non-fossil 0.194039, dry mass 0.346837 kg, water content 2882.2, wet mass 1000 kg

## Inputs from nature
- Boron [natural resource, in ground]: 0.128242 kg; lognormal variance with pedigree 0.0926, pedigree (4,4,5,5,4)
- Gangue [natural resource, in ground]: 1.4301 kg; lognormal variance with pedigree 0.0532, pedigree (4,4,5,5,2)
- Occupation, mineral extraction site [natural resource, land]: 0.00706 m2*year; lognormal variance with pedigree 0.3106, pedigree (4,3,5,5,5)
- Transformation, from forest, unspecified [natural resource, land]: 9.42e-5 m2; lognormal variance with pedigree 0.4006, pedigree (4,3,5,5,5)
- Transformation, to mineral extraction site [natural resource, land]: 9.42e-5 m2; lognormal variance with pedigree 0.4006, pedigree (4,3,5,5,5)
- Water, well, in ground [natural resource, in water]: 0.00185442 m3; lognormal variance with pedigree 0.0532, pedigree (4,4,5,5,2)

## Emissions to nature
- Particulate Matter, > 10 um [air, urban air close to ground]: 0.014 kg; lognormal variance with pedigree 0.138, pedigree (4,5,5,5,4)

## Sampling procedure
The data are extrapolated from the US dataset.

## Extrapolations
This dataset has been extrapolated from the original dataset covering the geography TR. The uncertainty has been adjusted accordingly
