# niobium mine operation and beneficiation, from pyrochlore ore

Dataset: EcoSpold 2, unit process
Geography: RoW
Time period: 2019-01-01 to 2023-12-31
Technology level: current
Classification: ISIC rev.4 ecoinvent: 0729:Mining of other non-ferrous metal ores
Scenario: Business-as-Usual
System model: Substitution, consequential, long-term
Generated by: Efstathios Kakkos
Database: ecoinvent
isCopyrightProtected: true
accessRestrictedTo: 1

## General comment
This dataset has been copied from an original dataset covering the geography of BR. The data is assumed to be also representative of the global situation, since Brazil produces more than 87% of niobium concentrates and pyrochlore is the leading mineral for the production of niobium (Source: https://prd-wret.s3.us-west-2.amazonaws.com/assets/palladium/production/atoms/files/myb1-2017-niobi.pdf). This dataset refers to the production of 1 kg of (refined) pyrochlore concentrate (63% beneficiated), as a result of the mining and beneficiation activities in Araxa, Brazil.

## Included activities start
The activities start with the mining (open-pit mining) of the pyrochlore ore.

## Included activities end
The activities end with the production of the refined pyrochlore concentrate, 63% beneficiated.

## Allocation
No allocation is applied.

## Technology
Open-pit mining is applied and hydraulic excavators are used to extract the ore with different grades, which is transported to stockpiles awaiting homogenization through earth-moving equipment in order to attain the same concentration.
Conveyor belts (3.5 km) are utilized to transport the homogenized ore to the concentration unit.
Initially, the ore passes through a jaw crusher and moves to the ball mills, where the pyrochlore grains (1 mm average diameter) are reduced to diameters less than 0.104 mm. In the ball mills, recycled water is added in order to i) granulate the concentrate and ii) remove the gas from the sintering unit. The granulated ore undergoes i) magnetic separation, where magnetite is removed and is sold as a coproduct and ii) desliming in order to remove fractions smaller than 5μm by utilizing cyclones. Then the ore enters the flotation process - last stage of the beneficiation process – where the pyrochlore particles come into contact with flotation chemicals (hydrochloric & fluorosilic acid, triethylamene and lime), thereby removing the solid fractions and producing pyrochlore concentrate and barite as a coproduct which is also sold. The produced concentrate contains 55% Nb2O5 and 11% water and moves to the sintering unit, via tubes or is transported in bags while the separated and unused minerals enter the tailings dam.
In the sintering unit, the pyrochlore concentrate undergoes pelletizing, sintering, crushing and classification. These units not only accumulate the material but are also responsible for removing sulfur and water from the concentrate. Then the concentrate enters the dephosphorization unit, where phosphorus and lead are removed from the concentrate. The removal of sulphur and phosphorus have to be executed because of the local pyrochlore ore composition. Then the concentrate undergoes a carbothermic reduction by using charcoal and petroleum coke, producing a refined concentrate, 63% Nb2O5 and tailings with high lead content that are disposed in the tailings dam again.

## Time period
Data are considered representative of current production practices.

## Reference product
- pyrochlore concentrate: 1 kg; By-product classification allocatable product; CPC 14290: Other non-ferrous metal ores and concentrates (other than uranium or thorium ores and concentrates)
  production volume 1.46143e7 kg
  properties: carbon allocation 0 kg, carbon content 0, carbon content, fossil 0, carbon content, non-fossil 0, dry mass 1 kg, niobium content 0.44037, oxygen content 0.18963, price 11.9042 EUR2005, water content 0, water in wet mass 0 kg, wet mass 1 kg

## Inputs from technosphere
- barite: -3.67742 kg; lognormal variance with pedigree 0.0027, pedigree (1,2,1,5,1)
  properties: dry mass 1 kg, price 0.127312 EUR2005, wet mass 1 kg
- charcoal: 0.0451613 kg; lognormal variance with pedigree 0.0027, pedigree (1,2,1,5,1)
  properties: carbon content, non-fossil 0.8, dry mass 1 kg, heating value, net 28.4 MJ, wet mass 1 kg
- chemical, inorganic: 0.167742 kg; lognormal variance with pedigree 0.0027, pedigree (1,2,1,5,1)
  properties: carbon content, fossil 0.003, dry mass 1 kg, wet mass 1 kg
- conveyor belt: 5.59645e-7 m; lognormal variance with pedigree 0.1221, pedigree (1,2,1,5,1)
- diesel, burned in diesel-electric generating set, 10MW: 3.09677 MJ; lognormal variance with pedigree 0.0027, pedigree (1,2,1,5,1)
  properties: heating value, net 1 MJ
- electricity, medium voltage: 0.00249467, 0.00292889, 0.0426861, 0.000370495, 0.00586386, 6.63578e-5, 0.00164092, 0.0358848, 0.00725055, 0.00184042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 kWh (30 suppliers, which the file names only by identifier); sum of these 2.22043 kWh; lognormal variance with pedigree 0.0027, pedigree (1,2,1,5,1)
- heat, district or industrial, other than natural gas: 0.193548, 2.25806 MJ (2 suppliers, which the file names only by identifier); sum of these 2.45161 MJ; lognormal variance with pedigree 0.0027, pedigree (1,2,1,5,1)
  properties: corresponding fuel use, propane, furnace >100kW 1.05263 MJ, heating value, net 1 MJ
- iron ore concentrate: -2.90323 kg; lognormal variance with pedigree 0.0027, pedigree (1,2,1,5,1)
  properties: dry mass 1 kg, iron content 0.67, price 0.0467 EUR2005, wet mass 1 kg
- mine infrastructure, underground, non-ferrous metal: 2.09677e-9 unit; lognormal variance with pedigree 0.3021, pedigree (1,2,1,5,1)
- non-sulfidic overburden, off-site: -19.0323 kg; lognormal variance with pedigree 0.0027, pedigree (1,2,1,5,1)
  properties: dry mass 1 kg, wet mass 1 kg
- petroleum coke: 0.0258065 kg; lognormal variance with pedigree 0.0027, pedigree (1,2,1,5,1)
  properties: carbon content, fossil 0.885, dry mass 1 kg, heating value, net 35 MJ, wet mass 1 kg
- sulfidic tailings, generic: -49.2105 kg; lognormal variance with pedigree 0.0027, pedigree (1,2,1,5,1)
  properties: aluminium content 0.014738, calcium content 0.0045972, carbon content, fossil 0.0087785, dry mass 0.7 kg, iron content 0.015374, magnesium content 0.0022359, oxygen content 0.89157, potassium content 0.0025181, silicon content 0.053273, sodium content 0.0014472, water content 0.42857, wet mass 1 kg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

## Inputs from nature
- Clay, unspecified [natural resource, in ground]: 19.0323 kg; lognormal variance with pedigree 0.0027, pedigree (1,2,1,5,1)
- Gangue [natural resource, in ground]: 27.8073 kg; lognormal variance with pedigree 0.0027, pedigree (1,2,1,5,1)
- Iron [natural resource, in ground]: 13.3953 kg; lognormal variance with pedigree 0.0027, pedigree (1,2,1,5,1)
- Niobium [natural resource, in ground]: 0.732823 kg; lognormal variance with pedigree 0.0027, pedigree (1,2,1,5,1)
- Occupation, mineral extraction site [natural resource, land]: 0.00329194 m2*year; lognormal variance with pedigree 0.1306, pedigree (3,5,5,4,4)
- Transformation, from unspecified [natural resource, land]: 0.00329194 m2; lognormal variance with pedigree 0.2106, pedigree (3,5,5,4,4)
- Transformation, to mineral extraction site [natural resource, land]: 0.00329194 m2; lognormal variance with pedigree 0.0912, pedigree (3,5,5,4,4)
- Water, unspecified natural origin [natural resource, in water]: 0.0231528 m3; lognormal variance with pedigree 0.0027, pedigree (1,2,1,5,1)

## Emissions to nature
- Carbon monoxide, fossil [air, non-urban air or from high stacks]: 0.0532613 kg; lognormal variance with pedigree 0.736, pedigree (3,4,5,5,4)
- Carbon monoxide, non-fossil [air, non-urban air or from high stacks]: 0.0842552 kg; lognormal variance with pedigree 0.736, pedigree (3,4,5,5,4)
- Particulate Matter, < 2.5 um [air, non-urban air or from high stacks]: 0.000209677 kg; lognormal variance with pedigree 0.386, pedigree (3,4,5,5,4)
- Particulate Matter, > 10 um [air, non-urban air or from high stacks]: 0.0021689 kg; lognormal variance with pedigree 0.126, pedigree (3,4,5,5,4)
- Particulate Matter, > 2.5 um and < 10um [air, non-urban air or from high stacks]: 0.0018871 kg; lognormal variance with pedigree 0.206, pedigree (3,4,5,5,4)
- Sulfur dioxide [air, non-urban air or from high stacks]: 0.0064732 kg; lognormal variance with pedigree 0.0866, pedigree (3,4,5,5,4)
- Water [water, unspecified]: 0.0083871 m3; lognormal variance with pedigree 0.0027, pedigree (1,2,1,5,1)

## Sampling procedure
This dataset is based on the following publication: Dolganova, I., Bosch, F., Bach, V., Baitz, M., & Finkbeiner, M. (2020). Life cycle assessment of ferro niobium. The International Journal of Life Cycle Assessment, 25(3), 611-619. doi:10.1007/s11367-019-01714-7. The original dataset reports the amounts per kg of produced ferroniobium. Based on information about the inputs & outputs of the mining and beneficiation subprocesses (reported on figure 2 and Table 3 of the abovementioned publication) and the inputs / outputs required for the the production of ferroniobium (inputs: iron oxide as scrap, aluminium powder, fluorspar, lime / outputs: slag removed from the tailings amount - check tailings comment) reported in Table 2 of the abovemetioned publication and assuming electricity production for the aluminothermic process equal to 0.475 kWh / kg of Ferroniobium (check electricity comment) the dataset has been disaggregated (after removing the inputs and outputs of the aluminothermic production process) and the values reported represent the production of 1.55 kg of refined pyrochlore concentrate (63% Nb2O5). As a result, all remaining inputs and outputs reported in the publication were dividied by 1.55 kg to correspond to the production of 1 kg of refined pyrochlore concentrate (63% Nb2O5). Particulate matter emissions were taken from the CEPMEIP database (see the respective exchange comments). CO emissions (fossil and non-fossil) are present due to the carbothermic reduction process taking place with petroleum coke and charcoal as fuels (Source: Albrecht, S., Cymorek, C. and Eckert, J. (2011). Niobium and Niobium Compounds. In Ullmann's Encyclopedia of Industrial Chemistry, (Ed.). https://doi.org/10.1002/14356007.a17_251.pub2). Their calculation is based on the fact that the amount of (fossil and non-fossil) carbon emitted in the air, is the same with the carbon content of the CO emissions (see the respective CO emission comments). SO2 emissions were calculated based on the maximum amount allowed by law in Brazil (see the SO2 exchange comment). Despite the fact that in the original source the water is 100% recycled (13L as input and 13L as output) for this dataset the water input along with the amount of produced tailings are based on dry and wet mass balance. The presence of Particulates and SO2 as emissions is confirmed from the following source: Alves, A. R., & Coutinho, A. d. R. (2019). Life cycle assessment of niobium: A mining and production case study in Brazil. Minerals Engineering, 132, 275-283. doi:<https://doi.org/10.1016/j.mineng.2018.11.041>.

## Extrapolations
This dataset has been copied from an original dataset covering the geography BR. The uncertainty has been adjusted accordingly. For further information, see sampling procedure.
