# heat and power co-generation, natural gas, 160kW electrical, Jakobsberg

Dataset: EcoSpold 2, unit process
Geography: RoW
Time period: 2000-01-01 to 2022-12-31
Technology level: current
Classification: EcoSpold01Categories: natural gas/cogeneration
Classification: ISIC rev.4 ecoinvent: 3530:Steam and air conditioning supply
Tags: with true value
Scenario: Business-as-Usual
System model: Substitution, consequential, long-term
Generated by: [System]
Published in: Heck, T. 2007
Database: ecoinvent
isCopyrightProtected: true
accessRestrictedTo: 1

## General comment
The multioutput-process 'natural gas, burned in cogen 160kWe Jakobsberg, allocation exergy' delivers the coproducts 'electricity, at cogen 160kWe Jakobsberg, allocation exergy' and 'heat, at cogen 160kWe Jakobsberg, allocation exergy'. The exergy allocation is the allocation scheme suggested to be used within ecoinvent (e.g. in electricity mixes).
[This dataset was already contained in the ecoinvent database version 2. It was not individually updated during the transfer to ecoinvent version 3. Life Cycle Impact Assessment results may still have changed, as they are affected by changes in the supply chain, i.e. in other datasets. This dataset was generated following the ecoinvent quality guidelines for version 2. It may have been subject to central changes described in the ecoinvent version 3 change report (http://www.ecoinvent.org/database/ecoinvent-version-3/reports-of-changes/), and the results of the central updates were reviewed extensively. The changes added e.g. consistent water flows and other information throughout the database. The documentation of this dataset can be found in the ecoinvent reports of version 2, which are still available via the ecoinvent website. The change report linked above covers all central changes that were made during the conversion process.]

## Included activities end
The module includes fuel input, infrastructure, emissions to air, and substances needed for operation.

## Geography
Efficiencies refer to a specific plant in Switzerland.

## Technology
Specific cogeneration unit installed in Switzerland.

## Parameters
- scaling factor: 0.204082 dimensionless; name scaling_factor
  Dataset scaled to the output of 1MJ of heat.

## Reference product
- heat, central or small-scale, natural gas, Jakobsberg: 1 MJ; By-product classification allocatable product; CPC 17300: Steam and hot water
  production volume 5.22477e11 MJ
  properties: Corresponding fuel use 1.85934 MJ, EcoSpold01Allocation_undefined_1 24, EcoSpold01Allocation_undefined_10 24, EcoSpold01Allocation_undefined_11 24, EcoSpold01Allocation_undefined_12 24, EcoSpold01Allocation_undefined_13 24, EcoSpold01Allocation_undefined_14 24, EcoSpold01Allocation_undefined_15 24, EcoSpold01Allocation_undefined_16 24, EcoSpold01Allocation_undefined_18 100, EcoSpold01Allocation_undefined_2 24, EcoSpold01Allocation_undefined_3 0, EcoSpold01Allocation_undefined_4 100, EcoSpold01Allocation_undefined_5 24, EcoSpold01Allocation_undefined_6 24, EcoSpold01Allocation_undefined_7 24, EcoSpold01Allocation_undefined_8 24, EcoSpold01Allocation_undefined_9 24, carbon allocation 0 kg, carbon content 0, exergy 0.169678 MJ, price 0.01 EUR2005, true value relation 0.169678

## Inputs from technosphere
- electricity, low voltage: -0.000585919, -0.000212998, -4.35628e-5, -0.000173295, -0.00124937, -0.00116315, -0.0104295, -0.00144838 kWh (8 suppliers, which the file names only by identifier); sum of these -0.0153061 kWh; lognormal variance with pedigree 0.21, pedigree (5,5,5,5,5)
  properties: EcoSpold01Allocation_undefined_1 76, EcoSpold01Allocation_undefined_10 76, EcoSpold01Allocation_undefined_11 76, EcoSpold01Allocation_undefined_12 76, EcoSpold01Allocation_undefined_13 76, EcoSpold01Allocation_undefined_14 76, EcoSpold01Allocation_undefined_15 76, EcoSpold01Allocation_undefined_16 76, EcoSpold01Allocation_undefined_17 100, EcoSpold01Allocation_undefined_2 76, EcoSpold01Allocation_undefined_3 100, EcoSpold01Allocation_undefined_5 76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
- heat and power co-generation unit, 160kW electrical, common components for heat+electricity: 1.02041e-9 unit; lognormal variance with pedigree 0.122, pedigree (1,1,5,5,1)
- heat and power co-generation unit, 160kW electrical, components for electricity only: 1.02041e-9 unit; lognormal variance with pedigree 0.122, pedigree (1,1,5,5,1)
- heat and power co-generation unit, 160kW electrical, components for heat only: 1.02041e-9 unit; lognormal variance with pedigree 0.122, pedigree (1,1,5,5,1)
- lubricating oil: 6.12245e-6 kg; lognormal variance with pedigree 0.122, pedigree (1,1,5,5,1)
  properties: carbon content, fossil 0.75, dry mass 1 kg, heating value, net 40.2 MJ, wet mass 1 kg
- natural gas, low pressure: 6.66066e-5, 6.62996e-5, 5.54032e-5, 0.000184626, 0.000108658, 0.000143803, 0.000120935, 5.64775e-5, 0.00282873, 2.6704e-5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 m3 (13 suppliers, which the file names only by identifier); sum of these 0.00523286 m3; lognormal variance with pedigree 0.122, pedigree (1,1,5,5,1)
  properties: carbon content, fossil 0.695187, dry mass 1 kg, heating value, gross 39 MJ, heating value, net 36 MJ, wet mass 1 kg
- waste mineral oil: -4.43039e-6, -1.69206e-6 kg (2 suppliers, which the file names only by identifier); sum of these -6.12245e-6 kg; lognormal variance with pedigree 0.122, pedigree (1,1,1,5,1)
  properties: carbon content, fossil 0.864444, dry mass 0.9 kg, heating value, net 34.7 MJ, water content 0.111111, wet mass 1 kg

## Emissions to nature
All rows: lognormal variance with pedigree 0.122, pedigree (1,1,5,5,1)
- Carbon dioxide, fossil [air, urban air close to ground]: 0.0114286 kg
- Carbon monoxide, fossil [air, urban air close to ground]: 9.79592e-6 kg
- Dinitrogen monoxide [air, urban air close to ground]: 5.10204e-7 kg
- Methane, fossil [air, urban air close to ground]: 4.69388e-6 kg
- NMVOC, non-methane volatile organic compounds [air, urban air close to ground]: 4.08163e-7 kg
- Nitrogen oxides [air, urban air close to ground]: 3.06122e-6 kg
- Particulate Matter, < 2.5 um [air, urban air close to ground]: 3.06122e-8 kg
- Platinum [air, urban air close to ground]: 1.42857e-12 kg
- Sulfur dioxide [air, urban air close to ground]: 1.12245e-7 kg

## Sampling procedure
Emission measurements of operator, literature. Efficiencies from operator data.

## Extrapolations
This dataset has been copied from a dataset valid for Switzerland. Uncertainty has been adjusted accordingly. The Annual Production volume is estimated to be only slightly higher than the one for Switzerland for market mix reasons. The Swiss Annual Production volume is valid for the year 2009. Uncertainty has been adjusted accordingly.
