# mine construction, underground, hard coal

Dataset: EcoSpold 2, unit process
Geography: CN
Time period: 1999-01-01 to 2022-12-31
Technology level: current
Classification: ISIC rev.4 ecoinvent: 4290:Construction of other civil engineering projects
Classification: EcoSpold01Categories: hard coal/production
Tags: ConvertedDataset
Scenario: Business-as-Usual
System model: Substitution, consequential, long-term
Generated by: Roberto Dones
Published in: Röder, A. 2007
Database: ecoinvent
isCopyrightProtected: true
accessRestrictedTo: 1

## General comment
Generic information for ecoinvent "underground mine, hard coal" GLO dataset was available only for a few mines. For the preparation of the GLO dataset only amounts per tonne were available. The dataset has to be considered as a first approximation and may not reflect specific (CN) mines. Lifetime is assumed to be 30 years to take into account the lifetime of machinery. The main mine shaft is assumed to be filled with concrete after the end of the lifetime, therefore the corrosion of the wood in the galleries is not accounted for. For defining the total production of a unit model mine, one million tonne per year has been estimated as an average worldwide (excluding small mines in China). This estimation includes open pit as well as underground mines. Therefore the total lifetime production of 30 million tonne shall be considered as a normalisation factor more than an actual average value for the real underground mines. Explosives are assumed to be used only during operation. In this CN dataset, electricity (total amount assumed for GLO) is arbitrarily assumed to be half from grid and half from local small coal power plants.
[This dataset was already contained in the ecoinvent database version 2. It was not individually updated during the transfer to ecoinvent version 3. Life Cycle Impact Assessment results may still have changed, as they are affected by changes in the supply chain, i.e. in other datasets. This dataset was generated following the ecoinvent quality guidelines for version 2. It may have been subject to central changes described in the ecoinvent version 3 change report (http://www.ecoinvent.org/database/ecoinvent-version-3/reports-of-changes/), and the results of the central updates were reviewed extensively. The changes added e.g. consistent water flows and other information throughout the database. The documentation of this dataset can be found in the ecoinvent reports of version 2, which are still available via the ecoinvent website. The change report linked above covers all central changes that were made during the conversion process.]

## Included activities end
This module includes an estimation of the most important construction materials and energy (electricity: CN) use for a model (GLO) mine. The landuse for the infrastructure is also included. The machinery used for mining operation has been included in this module, because the relevant material use is not separated from the total material use in the available references.

## Geography
No information available.

## Technology
No specific information available.

## Reference product
- mine infrastructure, underground, hard coal: 1 unit; By-product classification allocatable product; CPC 53261: Mining constructions
  production volume 74.1258 unit
  properties: carbon allocation 0 kg, carbon content 0, price 1.38874e8 EUR2005

## Inputs from technosphere
- blasting: 3e6 kg; lognormal variance with pedigree 0.3, pedigree (1,1,5,1,1)
- concrete, normal strength: 91000 m3; lognormal variance with pedigree 0.3, pedigree (1,1,5,1,1)
  properties: dry mass 2190 kg, water content 0.086758, wet mass 2380 kg
- copper, cathode: 60000 kg; lognormal variance with pedigree 0.65, pedigree (1,1,5,1,1)
  properties: dry mass 1 kg, wet mass 1 kg
- diesel, burned in building machine: 1.8e8 MJ; lognormal variance with pedigree 0.3, pedigree (1,1,5,1,1)
  properties: heating value, net 1 MJ
- electricity, high voltage: 6e6 kWh; lognormal variance with pedigree 0.3, pedigree (1,1,5,1,1)
- electricity, medium voltage: 6e6 kWh; lognormal variance with pedigree 0.3, pedigree (1,1,5,1,1)
- heat, district or industrial, other than natural gas: 1.8e8 MJ; lognormal variance with pedigree 0.3, pedigree (1,1,5,1,1)
  properties: heating value, net 1 MJ
- plywood: 165 m3; lognormal variance with pedigree 0.3, pedigree (1,1,5,1,1)
  properties: carbon content, fossil 0.09783, carbon content, non-fossil 0.409818, dry mass 768.6 kg, heating value, net 11688.9 MJ, price 400 EUR2005, water content 0.070778, wet mass 823 kg
- reinforcing steel: 1.5e7 kg; lognormal variance with pedigree 0.65, pedigree (1,1,5,1,1)
  properties: carbon content, fossil 0.004, dry mass 1 kg, wet mass 1 kg
- sawnwood, hardwood, raw, dried (u=20%): 389000 m3; lognormal variance with pedigree 0.3, pedigree (1,1,5,1,1)
  properties: carbon content, non-fossil 0.494, dry mass 650 kg, heating value, net 9410.32 MJ, water content 0.2, wet mass 780 kg
- steel, low-alloyed, hot rolled: 3e6 kg; lognormal variance with pedigree 0.65, pedigree (1,1,5,1,1)
  properties: carbon content, fossil 0.005, dry mass 1 kg, wet mass 1 kg
- waste wood, untreated: -89900 kg; lognormal variance with pedigree 0.3, pedigree (1,1,1,1,1)
  properties: carbon content, non-fossil 0.48632, dry mass 0.8 kg, heating value, net 13.99 MJ, water content 0.25, wet mass 1 kg

## Inputs from nature
- Occupation, industrial area [natural resource, land]: 4.44e7 m2*year; lognormal variance with pedigree 0.65, pedigree (1,1,5,1,1)
- Transformation, from unspecified [natural resource, land]: 2.22e6 m2; lognormal variance with pedigree 0.65, pedigree (1,1,5,1,1)
- Transformation, to industrial area [natural resource, land]: 2.22e6 m2; lognormal variance with pedigree 0.65, pedigree (1,1,5,1,1)

## Sampling procedure
literature

## Extrapolations
see Geography/Text

## Review by Rolf Frischknecht 2007-09-05
passed
