# shale quarry operation

Dataset: EcoSpold 2, unit process
Geography: CA-QC
Time period: 2012-01-01 to 2022-12-31
Technology level: current
Classification: EcoSpold01Categories: construction materials/additives
Classification: ISIC rev.4 ecoinvent: 0810:Quarrying of stone, sand and clay
Tags: single enterprise data
Scenario: Business-as-Usual
System model: Substitution, consequential, long-term
Share of production covered: 100 %
Generated by: Catherine Reid
Database: ecoinvent
isCopyrightProtected: true
accessRestrictedTo: 1

## General comment
This dataset represent the extraction of shale in Quebec in 2012. Specific data were collected from the only producer of brick (made from shale) in Quebec, with an annual production of 70'000 tons.
The assumed thickness of shale on the site is 90 feet (sampling reveal the presence of shale at this depht) and because 30 feet has been used in the last 100 years, the total lifetime is estimated to 300 years.
No shale quarry construction is needed since the infrastructures are associated with the brick production. Therefore only the land transformation related to the quarry opening is accounted for in the current dataset.

## Included activities start
This activity start from the transformation of the land to create the shale production site (quarry).

## Included activities end
This activity ends with the transportation of the shale to the brick production facility.

The dataset includes excavation by digger, transportation to the grinding machine (brick production), the land-use of the mining and the recultivation area ("recultivation, bauxite mine" has been used as Proxy).

This dataset doesn't include the machinery for the site preparation and site closure.

## Geography
This module represents the land use and the diesel consumption from the only producer of brick in Quebec. Estimation for the recultivation is a rough estimation based on an existing european dataset (limestone mine). Uncertainty adjusted accordingly.

## Technology
Typical technology for Quebec shale mining

## Time period
The dataset represents the activity in 2012

## Reference product
- shale: 1 kg; By-product classification allocatable product; CPC 15: Stone, sand and clay
  production volume 7e7 kg
  properties: bulk density 2000 kg/m3, carbon allocation 0 kg, carbon content 0, carbon content, fossil 0, carbon content, non-fossil 0, dry mass 0.965 kg, price 0.041 EUR2005, volume 27.43 m3, water content 0.0362694, water in wet mass 0.035 kg, wet mass 1 kg

## Inputs from technosphere
- diesel, burned in building machine: 0.0123962 MJ; lognormal variance with pedigree 0, pedigree (1,1,4,1,1)
  properties: density 0.84 kg/l, fuel input in physical units, m3 3.448e-7 m3, heating value, net 1 MJ
- recultivation, shale quarry: 1.82282e-5 m2; lognormal variance with pedigree 0.21, pedigree (5,5,5,5,5)

## Inputs from nature
- Occupation, mineral extraction site [natural resource, land]: 0.00546847 m2*year; lognormal variance with pedigree 0, pedigree (1,1,4,1,1)
- Shale [natural resource, in ground]: 1 kg; lognormal variance with pedigree 0.0006, pedigree (1,1,4,1,1)
- Transformation, from unspecified [natural resource, land]: 1.82282e-5 m2; lognormal variance with pedigree 0, pedigree (1,1,4,1,1)
- Transformation, to mineral extraction site [natural resource, land]: 1.82282e-5 m2; lognormal variance with pedigree 0, pedigree (1,1,4,1,1)

## Sampling procedure
Estimations from data provider and similar processes.

## Extrapolations
Shale layer and diesel consumption based on the only Quebec brick producer. Other information is rough estimation. The uncertainty has been adjusted accordingly.
