# electric motor production, vehicle

Dataset: EcoSpold 2, unit process
Geography: RoW
Time period: 2000-01-01 to 2022-12-31
Technology level: current
Classification: ISIC rev.4 ecoinvent: 2710:Manufacture of electric motors, generators, transformers and electricity di
Classification: EcoSpold01Categories: transport systems/road
Tags: ConvertedDataset
Scenario: Business-as-Usual
System model: Substitution, consequential, long-term
Generated by: Marianne Leuenberger
Published in: Spielmann M. 2007
Database: ecoinvent
isCopyrightProtected: true
accessRestrictedTo: 1

## General comment
The module reflects an average electric motor used in BEV or HEV
[This dataset was already contained in the ecoinvent database version 2. It was not individually updated during the transfer to ecoinvent version 3. Life Cycle Impact Assessment results may still have changed, as they are affected by changes in the supply chain, i.e. in other datasets. This dataset was generated following the ecoinvent quality guidelines for version 2. It may have been subject to central changes described in the ecoinvent version 3 change report (http://www.ecoinvent.org/database/ecoinvent-version-3/reports-of-changes/), and the results of the central updates were reviewed extensively. The changes added e.g. consistent water flows and other information throughout the database. The documentation of this dataset can be found in the ecoinvent reports of version 2, which are still available via the ecoinvent website. The change report linked above covers all central changes that were made during the conversion process.]

## Included activities end
This data set includes the material used for the production of 1 kg electric motor for a electric vehicle

## Geography
Data valid for average electric motor

## Technology
Production of electric motor for BEV or HEV

## Reference product
- electric motor, vehicle: 1 kg; By-product classification allocatable product; CPC 461: Electric motors, generators and transformers, and parts thereof
  production volume 2.67763 kg
  properties: carbon allocation 0.00375 kg, carbon content 0.00375, carbon content, fossil 0.00375, carbon content, non-fossil 0, dry mass 1 kg, price 12.9 EUR2005, water content 0, water in wet mass 0 kg, wet mass 1 kg

## Inputs from technosphere
All rows: lognormal variance with pedigree 0.0406, pedigree (4,3,5,5,3)
- aluminium, cast alloy: 0.0528 kg
  properties: dry mass 1 kg, wet mass 1 kg
- aluminium, wrought alloy: 0.1122 kg
  properties: dry mass 1 kg, wet mass 1 kg
- copper, cathode: 0.09 kg
  properties: dry mass 1 kg, wet mass 1 kg
- sheet rolling, steel: 0.75 kg
- steel, low-alloyed, hot rolled: 0.75 kg
  properties: carbon content, fossil 0.005, dry mass 1 kg, wet mass 1 kg
- wire drawing, copper: 0.09 kg

## Sampling procedure
Literature

## Extrapolations
none This dataset has been copied from an original dataset covering the geography RER. The uncertainty has been adjusted accordingly.

## Review by Christian Bauer 2010-02-09
09.02.2010
passed
C:\Dokumente und Einstellungen\Marianne\Eigene Dateien\Projekte\277_Mobitool\Ecoinvent\Review\Upload 1\[Ecospold_ElectricMotor-v1.1.xls]X-Process
