# trichloromethane production

Dataset: EcoSpold 2, unit process
Geography: RoW
Time period: 1998-01-01 to 2022-12-31
Technology level: current
Classification: ISIC rev.4 ecoinvent: 2011:Manufacture of basic chemicals
Classification: EcoSpold01Categories: chemicals/organics
Synonyms: trichloroform; Methyl trichloride; formyl trichloride; r 20 (refrigerant); Chloroform; methane trichloride; Refrigerant R20; methenyl trichloride; R 20
Tags: ConvertedDataset
Scenario: Business-as-Usual
System model: Substitution, consequential, long-term
Share of production covered: 0 %
Generated by: Niels Jungbluth
Published in: Althaus H.-J. 2007
Database: ecoinvent
isCopyrightProtected: true
accessRestrictedTo: 1

## General comment
Inventory for a chemical.
[This dataset was already contained in the ecoinvent database version 2. It was not individually updated during the transfer to ecoinvent version 3. Life Cycle Impact Assessment results may still have changed, as they are affected by changes in the supply chain, i.e. in other datasets. This dataset was generated following the ecoinvent quality guidelines for version 2. It may have been subject to central changes described in the ecoinvent version 3 change report (http://www.ecoinvent.org/database/ecoinvent-version-3/reports-of-changes/), and the results of the central updates were reviewed extensively. The changes added e.g. consistent water flows and other information throughout the database. The documentation of this dataset can be found in the ecoinvent reports of version 2, which are still available via the ecoinvent website. The change report linked above covers all central changes that were made during the conversion process.]

## Included activities end
Gate to gate inventory for the production, estimation for infrastructure and not including by-products

## Geography
Plant e.g. in NL

## Technology
Chemical processing

## Time period
Publication date

## Reference product
- trichloromethane: 1 kg; By-product classification allocatable product; CPC 34110: Hydrocarbons and their halogenated, sulphonated, nitrated or nitrosated derivatives
  production volume 1.65216e8 kg
  properties: carbon allocation 0.101695 kg, carbon content 0.101695, carbon content, fossil 0.101695, carbon content, non-fossil 0, dry mass 1 kg, heating value, net 4.06 MJ, price 0.55 EUR2005, water content 0, water in wet mass 0 kg, wet mass 1 kg

## Inputs from technosphere
- chemical factory, organics: 4e-10 unit; lognormal variance with pedigree 0.59, pedigree (5,5,5,5,5)
- chlorine, liquid: 0.848 kg; lognormal variance with pedigree 0.046, pedigree (4,5,5,5,3)
  properties: dry mass 1 kg, wet mass 1 kg
- electricity, medium voltage: 0.0423124, 0.00158313, 0.0201141, 0.349106, 0.0293136, 0.00157119 kWh (6 suppliers, which the file names only by identifier); sum of these 0.444 kWh; lognormal variance with pedigree 0.03, pedigree (3,5,5,5,3)
- heat, district or industrial, natural gas: 1.37675, 9.07325 MJ (2 suppliers, which the file names only by identifier); sum of these 10.45 MJ; lognormal variance with pedigree 0.03, pedigree (3,5,5,5,3)
  properties: heating value, net 1 MJ
- natural gas, high pressure: 0.0135455, 0.00280337, 0.0025987, 0.000731854, 0.00562535, 0.00161628, 0.00102956, 0.00112569, 0.000682236, 0.000806279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 m3 (24 suppliers, which the file names only by identifier); sum of these 0.196154 m3; lognormal variance with pedigree 0.046, pedigree (4,5,5,5,3)
  properties: carbon content, fossil 0.602381, dry mass 0.84 kg, heating value, gross 39 MJ, heating value, net 36 MJ, wet mass 0.84 kg

## Emissions to nature
- Chloroethylene [air, urban air close to ground]: 5e-7 kg; lognormal variance with pedigree 0.148, pedigree (5,5,5,5,3)
- Chloroform [air, urban air close to ground]: 0.01 kg; lognormal variance with pedigree 0.148, pedigree (5,5,5,5,3)
- Methane, dichloro-, HCC-30 [air, urban air close to ground]: 0.0003 kg; lognormal variance with pedigree 0.148, pedigree (5,5,5,5,3)
- Methane, tetrachloro-, R-10 [air, urban air close to ground]: 0.001 kg; lognormal variance with pedigree 0.148, pedigree (5,5,5,5,3)
- Methane, dichloro-, HCC-30 [water, surface water]: 5e-6 kg; lognormal variance with pedigree 0.398, pedigree (5,5,5,5,3)

## Sampling procedure
Literature, company information, stoichiometric calculations, assumptions.

## Extrapolations
none This dataset has been copied from an original dataset covering the geography RER. The uncertainty has been adjusted accordingly.

## Review by Roland Hischier 2009-02-06
Passed.
