# electricity voltage transformation from high to medium voltage

Dataset: EcoSpold 2, unit process
Geography: AR
Time period: 2012-01-01 to 2022-12-31
Technology level: current
Classification: ISIC rev.4 ecoinvent: 3510:Electric power generation, transmission and distribution
Scenario: Business-as-Usual
System model: Substitution, consequential, long-term
Generated by: Alejandro P Arena
Published in: Suppen, N. 2017
Database: ecoinvent
isCopyrightProtected: true
accessRestrictedTo: 1

## General comment
This dataset represents the transformation of electricity voltage from high to medium voltage. The losses are valid for the year 2018, based on electricity generation and trade statistics: IEA World Energy Statistics and Balances, ISSN: 16834240, https://doi.org/10.1787/enestats-data-en
Definition of the voltage levels:
- High voltage level above 24 kV (large scale industry)
- Medium voltage level between 1 kV and 24 kV (medium to small scale industry, service sector
and public buildings)
- Low voltage level below 1 kV (Households)

## Included activities start
This activity starts with the high voltage electricity arriving at the transformer station.

## Included activities end
This activity ends with 1kWh of high voltage electricity transformed to medium voltage.

This dataset includes the losses during voltage transformation.

It doesn't include the transformer station itself as this is included in the dataset for the transmission network.

## Technology
Transformers are essential components of the electricity grid. They connect the different voltage levels.
Big power plants feed the electricity at a very high voltage to the electricity grid. Transformers between 600 MVA and 80 MVA can be found in substations, where the high transmission voltage is transformed to the medium distribution voltage. In an additional step the medium voltage is transformed to low voltage using transformers below 2.5 MVA. The small transformers below 2.5 MVA are allocated to the low voltage level, whereas all the other transformers are allocated to the medium voltage level.

## Parameters
- electricity transformation losses: 0 dimensionless
- total electricity losses within the country: 0 dimensionless

## Reference product
- electricity, medium voltage: 1 kWh; By-product classification allocatable product; CPC 17100: Electrical energy
  production volume 9.94828e10 kWh
  properties: carbon allocation 0 kg, carbon content 0, price 0.1 EUR2005

## Inputs from technosphere
- electricity, high voltage: 1.01342 kWh

## Extrapolations
This dataset was based on 'electricity voltage transformation from high to medium voltage', GLO/2008 (accessed Nov 2017). The Annual Production Volume and the amount of losses during transformation from High to medium voltage have been modified from the original dataset using information ​​for Argentina that have been taken from IEA / OECD Electricity information 2014, ISBN 978-92-64-21692-1. and from https://www.iea.org/statistics/statisticssearch/report/?country=ARGENTINA&product=electricityandheat&year=2014.
