# cement production, CEM III/A

Dataset: EcoSpold 2, unit process
Geography: RoW
Time period: 2005-01-01 to 2022-12-31
Technology level: current
Classification: ISIC rev.4 ecoinvent: 2394:Manufacture of cement, lime and plaster
Synonyms: Portlandhüttenzement; CEM III/A; Hochofenzement; blast furnace cement
Scenario: Business-as-Usual
System model: Substitution, consequential, long-term
Share of production covered: 10 %
Generated by: Michael Elias Boesch
Published in: Boesch, M.E. 2010
Database: ecoinvent
isCopyrightProtected: true
accessRestrictedTo: 1

## General comment
The dataset describes the production of cement (CEM III/A)

## Included activities start
From cradle, i.e. including all upstream activities. As source of gypsum, waste gypsum from flue gas treatment is assumed.

## Included activities end
This activity ends with the cement produced in the cement mill. The dataset does not include packaging and administration.

## Reference product
- cement, CEM III/A: 1 kg; By-product classification allocatable product; CPC 37440: Portland cement, aluminous cement, slag cement and similar hydraulic cements, except in the form of clinkers
  production volume 4.03879e11 kg
  properties: carbon allocation 0 kg, carbon content 0, carbon content, fossil 0, carbon content, non-fossil 0, dry mass 1 kg, price 0.0615 EUR2005, water content 0, water in wet mass 0 kg, wet mass 1 kg

## Inputs from technosphere
- cement factory: 5.36e-11 unit; lognormal variance with pedigree 0.3032, pedigree (2,1,3,4,1)
- clinker: 0.4703 kg; lognormal variance with pedigree 0.0053, pedigree (3,3,3,3,1)
  properties: dry mass 1 kg, wet mass 1 kg
- electricity, medium voltage: 5.10787e-5, 4.05515e-5, 1.86603e-5, 1.00732e-5, 1.39923e-6, 3.44549e-6, 0.00476495, 3.6699e-5, 0.000178281, 5.17748e-6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 kWh (34 suppliers, which the file names only by identifier); sum of these 0.0497 kWh; lognormal variance with pedigree 0.0053, pedigree (3,3,3,3,1)
- ethylene glycol: 0.00055 kg; lognormal variance with pedigree 0.0053, pedigree (3,3,3,3,1)
  properties: carbon content, fossil 0.387097, dry mass 1 kg, heating value, net 23.44 MJ, wet mass 1 kg
- ground granulated blast furnace slag: 0.168333, 0.168333, 0.168333 kg (3 suppliers, which the file names only by identifier); sum of these 0.505 kg; lognormal variance with pedigree 0.0053, pedigree (3,3,3,3,1)
  properties: dry mass 1 kg, wet mass 1 kg
- gypsum, mineral: 0.0241946, 0.000505442 kg (2 suppliers, which the file names only by identifier); sum of these 0.0247 kg; lognormal variance with pedigree 0.0053, pedigree (3,3,3,3,1)
  properties: dry mass 1 kg, wet mass 1 kg
- heat, district or industrial, other than natural gas: 0.000281691, 0.161318 MJ (2 suppliers, which the file names only by identifier); sum of these 0.1616 MJ; lognormal variance with pedigree 0.0006, pedigree (1,1,1,1,1)
  properties: heating value, net 1 MJ
- steel, low-alloyed: 0.00011 kg; lognormal variance with pedigree 0.0053, pedigree (3,3,3,3,1)
  properties: carbon content, fossil 0.005, dry mass 1 kg, wet mass 1 kg

## Emissions to nature
- Heat, waste [air, unspecified]: 0.179 MJ; lognormal variance with pedigree 0.0447, pedigree (3,3,3,3,1)

## Sampling procedure
Data approximates average European production
