# solar collector factory construction

Dataset: EcoSpold 2, unit process
Geography: RoW
Time period: 2001-01-01 to 2022-12-31
Technology level: current
Classification: EcoSpold01Categories: solar collector systems/production of components
Classification: ISIC rev.4 ecoinvent: 4100:Construction of buildings
Tags: ConvertedDataset
Scenario: Business-as-Usual
System model: Substitution, consequential, long-term
Generated by: Niels Jungbluth
Published in: Jungbluth, N. 2007
Database: ecoinvent
isCopyrightProtected: true
accessRestrictedTo: 1

## General comment
Factory with an annual production of 100'000m2 and a life time of 50 years.
[This dataset was already contained in the ecoinvent database version 2. It was not individually updated during the transfer to ecoinvent version 3. Life Cycle Impact Assessment results may still have changed, as they are affected by changes in the supply chain, i.e. in other datasets. This dataset was generated following the ecoinvent quality guidelines for version 2. It may have been subject to central changes described in the ecoinvent version 3 change report (http://www.ecoinvent.org/database/ecoinvent-version-3/reports-of-changes/), and the results of the central updates were reviewed extensively. The changes added e.g. consistent water flows and other information throughout the database. The documentation of this dataset can be found in the ecoinvent reports of version 2, which are still available via the ecoinvent website. The change report linked above covers all central changes that were made during the conversion process.]

## Included activities end
Building, land occupation and transformation of a factory for flat plate collectors. Not including machinery.

## Geography
Average of two production plants in DE and CH.

## Technology
Factory for production of solar collectors.

## Time period
Material data have been investigated for a collector produced in 2002. Data for energy uses during production have been investigated for 2001.

## Reference product
- solar collector factory: 1 unit; By-product classification allocatable product; CPC 53269: Other constructions for manufacturing
  production volume 2.67763 unit
  properties: carbon allocation 0 kg, carbon content 0, price 857255 EUR2005

## Inputs from technosphere
- building, hall: 1500 m2; lognormal variance with pedigree 0.044, pedigree (1,4,5,5,1)
- building, multi-storey: 5960 m3; lognormal variance with pedigree 0.044, pedigree (1,4,5,5,1)

## Inputs from nature
- Occupation, industrial area [natural resource, land]: 530000 m2*year; lognormal variance with pedigree 0.044, pedigree (1,4,5,5,1)
- Transformation, from unspecified [natural resource, land]: 10600 m2; lognormal variance with pedigree 0.124, pedigree (1,4,5,5,1)
- Transformation, to industrial area [natural resource, land]: 10590 m2; lognormal variance with pedigree 0.124, pedigree (1,4,5,5,1)

## Sampling procedure
Questionnaires.

## Extrapolations
Average of two plants as assumption for several plants in Europe. This dataset has been copied from an original dataset covering the geography RER. The uncertainty has been adjusted accordingly.

## Review by Sebastiano Meier 2003-07-07
Passed.
