# ventilation system production, central, 1 x 720 m3/h, steel ducts, with earth tube heat exchanger

Dataset: EcoSpold 2, unit process
Geography: RoW
Time period: 2003-01-01 to 2022-12-31
Technology level: current
Classification: EcoSpold01Categories: ventilation/ventilation systems
Classification: ISIC rev.4 ecoinvent: 4322:Plumbing, heat and air-conditioning installation
Tags: ConvertedDataset
Scenario: Business-as-Usual
System model: Substitution, consequential, long-term
Generated by: Alex Primas
Published in: Hässig, W. 2007
Database: ecoinvent
isCopyrightProtected: true
accessRestrictedTo: 1

## General comment
Ventilation system for a multi family house. The house considered in the investigation includes 6 flats with 130 m2 floor area each and a ventilation rate of 120 m3/h. The influence of a smaller concrete demand due to embedment of ventilation tubes in the concrete of the floor (-8.05 kg concrete per m2 floor area) is not included.
[This dataset was already contained in the ecoinvent database version 2. It was not individually updated during the transfer to ecoinvent version 3. Life Cycle Impact Assessment results may still have changed, as they are affected by changes in the supply chain, i.e. in other datasets. This dataset was generated following the ecoinvent quality guidelines for version 2. It may have been subject to central changes described in the ecoinvent version 3 change report (http://www.ecoinvent.org/database/ecoinvent-version-3/reports-of-changes/), and the results of the central updates were reviewed extensively. The changes added e.g. consistent water flows and other information throughout the database. The documentation of this dataset can be found in the ecoinvent reports of version 2, which are still available via the ecoinvent website. The change report linked above covers all central changes that were made during the conversion process.]

## Included activities end
Materials used for the ventilation system. Transport of the components to the construction site. Disposal of the components included. Influence of ventilation ducts on building construction not included. No materials for renwal of components included. Operation of system not included.

## Geography
Data representative for a building in Zurich, Switzerland

## Technology
Central ventilation system including 4 parallel polyethylene ground heat exchanger tubes (200 mm diameter). Air distribution from the central ventilation unit with a galvanised steel tube (400 mm diameter) to the distribution housings in the 6 flats. Distribution of fresh- and exhaust-air within the flat with galvanised steel ducts (100x50 mm). Exhaust air from the air collection housings in the 6 flats with a galvanised steel tube (400 mm diameter) to the central ventilation unit. Exhaust air from the ventilation unit to the outside air with a galvanised steel tube (400 mm diameter).

## Time period
Amount of material investigated in 2003

## Reference product
- ventilation system, central, 1 x 720 m3/h, steel ducts, with earth tube heat exchanger: 1 unit; By-product classification allocatable product; CPC 44815: Fans and ventilating or recycling hoods of the domestic type
  production volume 3.96633 unit
  properties: carbon allocation 0 kg, carbon content 0, price 4953.88 EUR2005

## Inputs from technosphere
- air distribution terminal panel, steel, 120 m3/h: 12 unit; lognormal variance with pedigree 0.0046, pedigree (2,4,5,5,1)
  properties: carbon content, fossil 0.0166978, dry mass 9.5 kg, wet mass 9.5 kg
- air filter, central unit, 600 m3/h: 2 unit; lognormal variance with pedigree 0.0046, pedigree (2,4,5,5,1)
  properties: carbon content, fossil 0.085325, dry mass 0.4 kg, wet mass 0.4 kg
- air filter, in exhaust air valve: 18 unit; lognormal variance with pedigree 0.0046, pedigree (2,4,5,5,1)
  properties: carbon content, fossil 0.65625, dry mass 0.04 kg, wet mass 0.04 kg
- blower and heat exchange unit, central, 600-1200 m3/h: 1 unit; lognormal variance with pedigree 0.0046, pedigree (2,4,5,5,1)
  properties: carbon content, fossil 0.00852676, carbon content, non-fossil 5.13903e-7, dry mass 143 kg, wet mass 143 kg
- excavation, hydraulic digger: 137 m3; lognormal variance with pedigree 0.022, pedigree (4,4,5,5,1)
- exhaust air roof hood, steel, DN 400: 1 unit; lognormal variance with pedigree 0.002, pedigree (1,1,5,5,1)
  properties: carbon content, fossil 0.00377059, dry mass 17 kg, wet mass 17 kg
- exhaust air valve, in-wall housing, plastic/steel, DN 125: 18 unit; lognormal variance with pedigree 0.0046, pedigree (2,4,5,5,1)
  properties: carbon content, fossil 0.0797702, dry mass 0.5 kg, wet mass 0.5 kg
- flexible duct, aluminium/PET, DN of 125: 20 m; lognormal variance with pedigree 0.0046, pedigree (2,4,5,5,1)
  properties: carbon content, fossil 0.436512, dry mass 0.205 kg, wet mass 0.205 kg
- insulation spiral-seam duct, rockwool, DN 400, 30 mm: 20 m; lognormal variance with pedigree 0.0046, pedigree (2,4,5,5,1)
  properties: carbon content, fossil 0.00924113, dry mass 3.3 kg, wet mass 3.3 kg
- outside air intake, stainless steel, DN 370: 1 unit; lognormal variance with pedigree 0.0046, pedigree (2,4,5,5,1)
  properties: carbon content, fossil 0.0520342, dry mass 32 kg, wet mass 32 kg
- polyethylene pipe, DN 200, SDR 41: 120 m; lognormal variance with pedigree 0.0046, pedigree (2,4,5,5,1)
  properties: carbon content, fossil 0.857143, dry mass 3 kg, heating value, net 127.41 MJ, wet mass 3 kg
- room-connecting overflow element, steel, approx. 40 m3/h: 18 unit; lognormal variance with pedigree 0.0046, pedigree (2,4,5,5,1)
  properties: carbon content, fossil 0.211386, dry mass 1.1 kg, wet mass 1.1 kg
- sealing tape, aluminium/PE, 50 mm wide: 700 m; lognormal variance with pedigree 0.0046, pedigree (2,4,5,5,1)
  properties: carbon content, fossil 0.707644, dry mass 0.057 kg, wet mass 0.057 kg
- silencer, steel, DN 125: 12 unit; lognormal variance with pedigree 0.0046, pedigree (2,4,5,5,1)
  properties: carbon content, fossil 0.00483456, dry mass 8.3 kg, wet mass 8.3 kg
- silencer, steel, DN 315, 50 mm: 2 unit; lognormal variance with pedigree 0.0046, pedigree (2,4,5,5,1)
  properties: carbon content, fossil 0.00451943, dry mass 20 kg, wet mass 20 kg
- spiral-seam duct, steel, DN 125: 12 m; lognormal variance with pedigree 0.0046, pedigree (2,4,5,5,1)
  properties: carbon content, fossil 0.00377105, dry mass 1.9 kg, wet mass 1.9 kg
- spiral-seam duct, steel, DN 400: 45 m; lognormal variance with pedigree 0.0046, pedigree (2,4,5,5,1)
  properties: carbon content, fossil 0.00376667, dry mass 6 kg, wet mass 6 kg
- supply air inlet, steel/SS, DN 75: 30 unit; lognormal variance with pedigree 0.0046, pedigree (2,4,5,5,1)
  properties: carbon content, fossil 0.00337682, dry mass 2.2 kg, wet mass 2.2 kg
- used air distribution terminal panel steel, 120 m3/h: -12 unit; lognormal variance with pedigree 0.0046, pedigree (2,4,1,5,1)
  properties: carbon content, fossil 0.0166978, dry mass 9.5 kg, wet mass 9.5 kg
- used air filter central unit, 600 m3/h: -2 unit; lognormal variance with pedigree 0.0046, pedigree (2,4,1,5,1)
  properties: carbon content, fossil 0.085325, dry mass 0.4 kg, wet mass 0.4 kg
- used air filter in exhaust air valve: -18 unit; lognormal variance with pedigree 0.0046, pedigree (2,4,1,5,1)
  properties: carbon content, fossil 0.65625, dry mass 0.04 kg, wet mass 0.04 kg
- used blower and heat exchange unit central, 600-1200 m3/h: -1 unit; lognormal variance with pedigree 0.0046, pedigree (2,4,1,5,1)
  properties: carbon content, fossil 0.00852676, carbon content, non-fossil 5.13903e-7, dry mass 143 kg, wet mass 143 kg
- used exhaust air roof hood steel, DN 400: -1 unit; lognormal variance with pedigree 0.0046, pedigree (2,4,1,5,1)
  properties: carbon content, fossil 0.00377059, dry mass 17 kg, wet mass 17 kg
- used exhaust air valve in-wall housing, plastic/steel: -18 unit; lognormal variance with pedigree 0.0046, pedigree (2,4,1,5,1)
  properties: carbon content, fossil 0.0797702, dry mass 0.5 kg, wet mass 0.5 kg
- used flexible duct aluminium/PET, DN of 125: -20 m; lognormal variance with pedigree 0.0046, pedigree (2,4,1,5,1)
  properties: carbon content, fossil 0.436512, dry mass 0.205 kg, wet mass 0.205 kg
- used insulation spiral-seam duct rockwool, DN 400: -20 m; lognormal variance with pedigree 0.0046, pedigree (2,4,1,5,1)
  properties: carbon content, fossil 0.00924113, dry mass 3.3 kg, wet mass 3.3 kg
- used outside air intake stainless steel, DN 370: -1 unit; lognormal variance with pedigree 0.0046, pedigree (2,4,1,5,1)
  properties: carbon content, fossil 0.0520342, dry mass 32 kg, wet mass 32 kg
- used room-connecting overflow element steel, approx. 40 m3/h: -18 unit; lognormal variance with pedigree 0.0046, pedigree (2,4,1,5,1)
  properties: carbon content, fossil 0.211386, dry mass 1.1 kg, wet mass 1.1 kg
- used sealing tape aluminium/PE, 50 mm wide: -700 m; lognormal variance with pedigree 0.0046, pedigree (2,4,1,5,1)
  properties: carbon content, fossil 0.707644, dry mass 0.057 kg, wet mass 0.057 kg
- used silencer steel, DN 125: -12 unit; lognormal variance with pedigree 0.0046, pedigree (2,4,1,5,1)
  properties: carbon content, fossil 0.00483456, dry mass 8.3 kg, wet mass 8.3 kg
- used silencer steel, DN 315: -2 unit; lognormal variance with pedigree 0.0046, pedigree (2,4,1,5,1)
  properties: carbon content, fossil 0.00451943, dry mass 20 kg, wet mass 20 kg
- used ventilation control and wiring central unit: -1 unit; lognormal variance with pedigree 0.0046, pedigree (2,4,1,5,1)
  properties: carbon content, fossil 0.262305, carbon content, non-fossil 1.68025e-5, dry mass 4.8 kg, wet mass 4.8 kg
- ventilation control and wiring, central unit: 1 unit; lognormal variance with pedigree 0.0046, pedigree (2,4,5,5,1)
  properties: carbon content, fossil 0.262305, carbon content, non-fossil 1.68025e-5, dry mass 4.8 kg, wet mass 4.8 kg
- ventilation duct, connection piece, steel, 100x50 mm: 150 unit; lognormal variance with pedigree 0.0046, pedigree (2,4,5,5,1)
  properties: carbon content, fossil 0.0037725, dry mass 0.2 kg, wet mass 0.2 kg
- ventilation duct, elbow 90°, steel, 100x50 mm: 228 unit; lognormal variance with pedigree 0.0046, pedigree (2,4,5,5,1)
  properties: carbon content, fossil 0.00376852, dry mass 0.27 kg, wet mass 0.27 kg
- ventilation duct, steel, 100x50 mm: 600 m; lognormal variance with pedigree 0.0046, pedigree (2,4,5,5,1)
  properties: carbon content, fossil 0.00376667, dry mass 1.5 kg, wet mass 1.5 kg
- waste bulk iron, excluding reinforcement: -438.39, -911.61 kg (2 suppliers, which the file names only by identifier); sum of these -1350 kg; lognormal variance with pedigree 0.0046, pedigree (2,4,1,5,1)
  properties: dry mass 1 kg, wet mass 1 kg
- waste polyethylene/polypropylene product: -101.835, -258.165 kg (2 suppliers, which the file names only by identifier); sum of these -360 kg; lognormal variance with pedigree 0.0046, pedigree (2,4,1,5,1)
  properties: carbon content, fossil 0.748045, dry mass 0.847 kg, heating value, net 42.47 MJ, water content 0.180638, wet mass 1 kg

## Sampling procedure
Questionnaire and assumptions. Data valid for example building used.

## Extrapolations
none This dataset has been copied from an original dataset covering the geography CH. The uncertainty has been adjusted accordingly.

## Review by Rolf Frischknecht 2007-08-16
passed
none
