# oxalic acid production

Dataset: EcoSpold 2, unit process
Geography: RoW
Time period: 2020-01-01 to 2024-12-31
Technology level: current
Classification: ISIC rev.4 ecoinvent: 2011:Manufacture of basic chemicals
Synonyms: ethanedioic acid; aquisal
Scenario: Business-as-Usual
System model: Substitution, consequential, long-term
Share of production covered: 66.7 %
Generated by: Efstathios Kakkos
Database: ecoinvent
isCopyrightProtected: true
accessRestrictedTo: 1

## General comment
This dataset refers to the average global production of 1 kg oxalic acid from propylene through the propylene oxidation method, a two-step method developed by Rhône-Poulenc. The dataset is based on the supplementary materials (Table S10, page S13) of the Wang et al (2020) publication.
This dataset has been approximated from the respective dataset from the CN geography.
In the first step, propylene enters a solution of nitric acid in a reactor at 10 – 40 oC, where it is partially oxidized and subsequently converted to α-nitratolactic acid. The stoichiometric equation is the following:
C3H6 + 3HNO3 -> C3H5O5N + 2NO + 2H2O
During the second step of the process, oxygen at 45 – 100 oC is used to treat the mixed and partially oxidized acid produced from the previous step, forming oxalic acid, which is crystallized and filtered. The overall efficiency of the process is claimed to be nearly 90% and approximately all of the propylene is converted. The stoichiometric equation for the second step is the following: C3H5O5N + 5/2 O2 -> C2H2O4 + CO2 + HNO3 + H2O.
The oxygen input was not originally present in the original source. However, due to the fact that is a direct input required for the oxidization, the oxygen amount has been calculated based on the 2nd stoichiometric equation. The amount (approximately 0.89 kg) has been increased by 5% in order to account for losses (standard procedure in chemical production datasets that are modelled in Ecoinvent).
Reference: Wang, L., Wang, P., Chen, W.-Q., Wang, Q.-Q., & Lu, H.-S. (2020). Environmental Impacts of Scandium Oxide Production from Rare Earths Tailings of Bayan Obo Mine. Journal of Cleaner Production, 122464. doi:https://doi.org/10.1016/j.jclepro.2020.122464.

## Included activities start
The activity starts with the oxidization of propylene.

## Included activities end
The activity ends with the production of oxalic acid.

## Geography
Data are extrapolated from chinese production data to represent the global production, as China represents 66.7% of global oxalic acid production. Source: https://www.businesswire.com/news/home/20110111006011/en/Research-Markets-Chinas-Oxalic-Acid-Industry-2010-2012

## Technology
See general comment.

## Time period
Data are considered representative of current production practices.

## Reference product
- oxalic acid: 1 kg; By-product classification allocatable product; CPC 34140: Carboxylic acids and their anhydrides, halides, peroxides and peroxyacids and their halogenated, sulphonated, […]
  production volume 1.5e8 kg
  properties: carbon allocation 0.2668 kg, carbon content 0.2668, carbon content, fossil 0.2668, carbon content, non-fossil 0, dry mass 1 kg, hydrogen content 0.0224, oxygen content 0.7108, price 2.03212 EUR2005, water content 0, water in wet mass 0 kg, wet mass 1 kg

## Inputs from technosphere
- chemical factory, organics: 4e-10 unit; lognormal variance with pedigree 0.3046, pedigree (2,4,1,5,1)
- electricity, medium voltage: 0.000316305, 0.00060108, 0.000359192, 7.23298e-6, 3.44724e-5, 4.04774e-5, 1.05007e-5, 0.00243233, 8.13887e-5, 0.00401052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 kWh (46 suppliers, which the file names only by identifier); sum of these 0.0194444 kWh; lognormal variance with pedigree 0.0052, pedigree (2,4,1,5,1)
- heat, district or industrial, other than natural gas: 14.739 MJ; lognormal variance with pedigree 0.0052, pedigree (2,4,1,5,1)
  properties: corresponding fuel use, propane, furnace >100kW 1.05263 MJ, heating value, net 1 MJ
- heat, from steam, in chemical industry: 0.760359, 4.31257 MJ (2 suppliers, which the file names only by identifier); sum of these 5.07292 MJ; lognormal variance with pedigree 0.0052, pedigree (2,4,1,5,1)
  properties: heating value, net 1 MJ
- inert waste: -0.00638331, -0.741152, -2.61246 kg (3 suppliers, which the file names only by identifier); sum of these -3.36 kg; lognormal variance with pedigree 0.0052, pedigree (2,4,1,5,1)
  properties: dry mass 1 kg, wet mass 1 kg
- nitric acid, without water, in 50% solution state: 0.193346, 0.0840001, 0.052326, 0.0774606, 0.0926411, 0.0777483, 0.25144, 0.590316, 0.680722 kg (9 suppliers, which the file names only by identifier); sum of these 2.1 kg; lognormal variance with pedigree 0.0052, pedigree (2,4,1,5,1)
  properties: dry mass 1 kg, wet mass 1 kg
- oxygen, liquid: 0.201207, 0.733293 kg (2 suppliers, which the file names only by identifier); sum of these 0.9345 kg; lognormal variance with pedigree 0.0052, pedigree (2,4,1,5,1)
  properties: dry mass 1 kg, wet mass 1 kg
- propylene: 0.541012, 0.167976, 0.541012 kg (3 suppliers, which the file names only by identifier); sum of these 1.25 kg; lognormal variance with pedigree 0.0052, pedigree (2,4,1,5,1)
  properties: carbon content, fossil 0.857143, dry mass 1 kg, heating value, net 43.22 MJ, wet mass 1 kg
- sodium hydroxide, without water, in 50% solution state: 0.92 kg; lognormal variance with pedigree 0.0052, pedigree (2,4,1,5,1)
  properties: dry mass 1 kg, heating value, net 3.03 MJ, wet mass 1 kg
- sulfuric acid: 0.184493, 0.765507 kg (2 suppliers, which the file names only by identifier); sum of these 0.95 kg; lognormal variance with pedigree 0.0052, pedigree (2,4,1,5,1)
  properties: dry mass 1 kg, wet mass 1 kg
- wastewater, average: -0.000572576, -1.43897e-5, -0.00239451, -8.52536e-6 m3 (4 suppliers, which the file names only by identifier); sum of these -0.00299 m3; lognormal variance with pedigree 0.0052, pedigree (2,4,1,5,1)
  properties: carbon content, non-fossil 0.194039, dry mass 0.346837 kg, water content 2882.2, wet mass 1000 kg

## Inputs from nature
- Water, unspecified natural origin [natural resource, in water]: 0.00239 m3; lognormal variance with pedigree 0.0052, pedigree (2,4,1,5,1)

## Emissions to nature
- Carbon dioxide, fossil [air, non-urban air or from high stacks]: 1.43 kg; lognormal variance with pedigree 0.0052, pedigree (2,4,1,5,1)
- Nitric oxide [air, unspecified]: 0.25 kg; lognormal variance with pedigree 0.0446, pedigree (2,4,1,5,1)
- Oxygen [air, unspecified]: 0.046725 kg; lognormal variance with pedigree 0.0446, pedigree (2,4,1,5,1)
- Sulfur dioxide [air, non-urban air or from high stacks]: 0.05 kg; lognormal variance with pedigree 0.0052, pedigree (2,4,1,5,1)

## Sampling procedure
This dataset is based on the supplementary materials (Table S10, page S13) of the following publication: Wang, L., Wang, P., Chen, W.-Q., Wang, Q.-Q., & Lu, H.-S. (2020). Environmental Impacts of Scandium Oxide Production from Rare Earths Tailings of Bayan Obo Mine. Journal of Cleaner Production, 122464. doi:https://doi.org/10.1016/j.jclepro.2020.122464. Individual exchanges that were not present within the Ecoinvent database have been modelled with assuming proxies. Unit conversion has been performed to some exchanges to match the unit of the foreground data with the unit of the representative process of Ecoinvent. More detailed info is provided in the individual comment of each exchange. Infrastructural input (i.e chemical factory) has been introduced to take into account the type of infrastructure used in order to produce the oxalic acid. This infrastructural input was not present on the original dataset and is added in order to comply with the requirements of the Ecoinvent database. The authors of the publication, compiled the dataset for oxalic acid based on the following:
Chemical Technology: An Integral Textbook, 2013. Wiley-VCH. 1-888. ISBN: 3527304460.

Hocking M.B., 2006. Handbook of Chemical Technology and Pollution Control, 3rd Edition. Academic Press. 1-799. ISBN: 9780120887965.

Hocking M.B., 2012. Modern Chemical Technology and Emission Control. Springer. 1-460. ISBN: 9783642697753.

Kirk-Othmer Chemical Technology and the Environment, 2007. Wiley. 1-1349. ISBN: 9780470105405.
Moulijn, J.A., Makkee, M., Diepen, A.E.V., 2013. Chemical Process Technology. Wiley. 1-566. ISBN: 9781444320244.

Murzin, D.Y., 2018. Chemical Product Technology. de Gruyter. 1-280. ISBN: 9783110475319.
P.R.C. National Standard GB/T 1626-2008, 2008. Oxalic acid for industrial use. China National Standardiza-tion Management Committee. December 1st.

Ullmann's Encyclopedia of Industrial Chemistry, 2005. Wiley. pp. 17624/28029. ISBN 9783527306732.
Wang, Y.S., Yun, K., Cao, Y., Qiu, R.C., 2017. Research status and prospect of industrialized preparation of oxalic acid. Modern Chemical Industry. 37, 15-18 (in Chinese).

## Extrapolations
This dataset has been copied from an original dataset covering the geography CN. The uncertainty has been adjusted accordingly. Since China represents more than 66.7% of the global production, this dataset is extrapolated to represent the global production of oxalic acid.

## Review by Tom Etheridge 2021-02-23
These changes and comments make the dataset much more transparent and all of my questions were addressed satisfactorily.
