# diethyl ether production

Dataset: EcoSpold 2, unit process
Geography: GLO
Time period: 2000-01-01 to 2022-12-31
Technology level: current
Classification: ISIC rev.4 ecoinvent: 2011:Manufacture of basic chemicals
Synonyms: ethyl oxide; 3-oxapentane; CH3CH2OCH2CH3; ethyl ether; ethoxyethane; ether; C4H10O
Scenario: Business-as-Usual
System model: Substitution, consequential, long-term
Generated by: Tereza Levova
Published in: Ullmann 2010
Database: ecoinvent
isCopyrightProtected: true
accessRestrictedTo: 1

## General comment
General comment: Diethyl ether is produced through three main production routes: 1) As a by-product during ethylene hydration (where ethanol is the reference product). This production route produces most of the production volume of diethyl ether (Ullmann’s Encyclopedia). 2) As a reference product in the sulphuric acid process (= ethanol dehydration). 3) As a reference product in catalytic dehydration over alumn. This activity represent production route no.2.

## Included activities start
The activity starts when the raw materials enters the process.

## Included activities end
Materials entering the process are included as well as energy uses, infrastructure and emissions.

## Technology
The production process presented in this activity is the sulphuric acid process of ethanol dehydration to diethyl ether (Brown, W.H. 2009, Organic Chemistry). The amount of chemicals on the input and output are calculated using stoichiometric relations. The yield of the reaction is 95%. Ethanol and sulfuric acid are heated to ca. 125°C in a ration of 1:3. The ether is distilled with part of the unreacted alcohol. Any sulfuric acid present in the destilate is removed by washing with dilute sodium hydroxide solution. Ethanol is introduced into the sulfuric acid either in vapor or in liquid form depending on the degree of conversion. The process runs continuously for several months and is then stopped to replace the sulfuric acid, which becomes heavily contaminated with tar-like polymers (Ullmann's Encyclopedia). The this polluted sulfuric acid is neutralized with sodium hydroxide before released to the environment.

## Time period
Time of publications.

## Parameters
- efficiency (obsolete): 0.95 dimensionless; lognormal variance with pedigree 0.1293, pedigree (4,3,1,3,5)
- fraction, cooling water, cooling pond system, to air: 0.032 dimensionless; name fraction_CW_CP_to_air; lognormal variance with pedigree 0.0413, pedigree (2,3,1,3,1)
  Calculated based on literature value (Scown, C.D., 2011, Water Footprint of U.S. Transportation Fuels and supplying information of the article) (Vionnet, S., Quantis Water Database - Technical Report, 2012).
- fraction, cooling water, once-through system, to air: 0.004 dimensionless; name fraction_CW_OT_to_air; lognormal variance with pedigree 0.0413, pedigree (2,3,1,3,1)
  (same comment as for fraction, cooling water, cooling pond system, to air)
- fraction, cooling water, recirculating system, to air: 0.771 dimensionless; name fraction_CW_R_to_air; lognormal variance with pedigree 0.0413, pedigree (2,3,1,3,1)
  (same comment as for fraction, cooling water, cooling pond system, to air)
- fraction, cooling water, to air: 0.3875 dimensionless; name fraction_CW_to_air; = (0.5*fraction_CW_OT_to_air)+(0.5*fraction_CW_R_to_air); lognormal variance with pedigree 0.092025, pedigree (4,4,3,2,4)
  Calculated value based on literature value (see comments of the other parametres present in this dataset) and expert opinion. In the case when no industry/literature data are available about the type of cooling or directly fraction, cooling water, to air specific for the process a default assumption is applied. It is assumed that the once-through cooling system is used in 50% of all cases and recirculating system is used in another 50% of all cases.

## Reference product
- diethyl ether, without water, in 99.95% solution state: 1 kg; By-product classification allocatable product; CPC 34170: Ethers, alcohol peroxides, ether peroxides, epoxides, acetals and hemiacetals, and their halogenated, sulphona[…]
  production volume 1.03016e7 kg
  properties: carbon allocation 0.648649 kg, carbon content 0.648649, carbon content, fossil 0.648649, carbon content, non-fossil 0, dry mass 1 kg, heating value, net 35.99 MJ, molecular weight 74.123 g/mol, price 1.12 EUR2005, water content 0, water in wet mass 0 kg, wet mass 1 kg

## Inputs from technosphere
- chemical factory, organics: 4e-10 unit; lognormal variance with pedigree 0.4321, pedigree (4,4,5,3,5)
- electricity, medium voltage: 0.333 kWh; lognormal variance with pedigree 0.1327, pedigree (4,4,5,3,5)
- ethanol, without water, in 99.7% solution state, from ethylene: 0.434775, 0.87369 kg (2 suppliers, which the file names only by identifier); sum of these 1.30847 kg; lognormal variance with pedigree 0.0246, pedigree (4,5,3,1,3)
  properties: carbon content, fossil 0.521739, dry mass 1 kg, heating value, net 28.1 MJ, molecular weight 46.069 g/mol, wet mass 1 kg
- heat, district or industrial, natural gas: 2 MJ; lognormal variance with pedigree 0.1327, pedigree (4,4,5,3,5)
  properties: heating value, net 1 MJ
- sodium hydroxide, without water, in 50% solution state: 3.16874 kg; lognormal variance with pedigree 0.0246, pedigree (4,5,3,1,3)
  properties: dry mass 1 kg, heating value, net 3.03 MJ, molecular weight 39.997 g/mol, wet mass 1 kg
- sulfuric acid: 0.762325, 3.16307 kg (2 suppliers, which the file names only by identifier); sum of these 3.9254 kg; lognormal variance with pedigree 0.0246, pedigree (4,5,3,1,3)
  properties: dry mass 1 kg, molecular weight 98.077 g/mol, wet mass 1 kg
- water, decarbonised: -0.000402233, -0.045011, -0.0837507, -0.0109914, -0.00728605, -0.00428902, -0.01116, -0.0133516, -0.00221582, -0.000547886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 kg (13 suppliers, which the file names only by identifier); sum of these -0.255838 kg; lognormal variance with pedigree 0.0246, pedigree (4,5,1,1,3)
  properties: molecular weight 18.0153 g/mol, price 0.00046 EUR2005, wet mass 1 kg

## Inputs from nature
- Water, cooling, unspecified natural origin [natural resource, in water]: 0.024 m3; lognormal variance with pedigree 0.1327, pedigree (4,4,5,3,5)

## Emissions to nature
- Carbon dioxide, fossil [air, urban air close to ground]: 0.0570114 kg; lognormal variance with pedigree 0.0246, pedigree (4,5,3,1,3)
- Ethanol [air, unspecified]: 0.00261693 kg; lognormal variance with pedigree 0.064, pedigree (4,5,3,1,3)
- Sulfuric acid [air, unspecified]: 0.00785079 kg; lognormal variance with pedigree 0.064, pedigree (4,5,3,1,3)
- Water [air, unspecified]: 0.0093 m3; lognormal variance with pedigree 0.092025, pedigree (4,4,5,2,4)
- BOD5, Biological Oxygen Demand [water, surface water]: 0.000662613 kg; lognormal variance with pedigree 0.064, pedigree (4,5,3,1,3)
- COD, Chemical Oxygen Demand [water, surface water]: 0.0132523 kg; lognormal variance with pedigree 0.064, pedigree (4,5,3,1,3)
- DOC, Dissolved Organic Carbon [water, surface water]: 0.00345449 kg; lognormal variance with pedigree 0.064, pedigree (4,5,3,1,3)
- Ethanol [water, unspecified]: 0.00662497 kg; lognormal variance with pedigree 0.064, pedigree (4,5,3,1,3)
- Sulfur [water, unspecified]: 1.34834 kg; lognormal variance with pedigree 0.064, pedigree (4,5,3,1,3)
- TOC, Total Organic Carbon [water, surface water]: 0.00345449 kg; lognormal variance with pedigree 0.064, pedigree (4,5,3,1,3)
- Water [water, unspecified]: 0.0147 m3; lognormal variance with pedigree 0.092025, pedigree (4,4,5,2,4)

## Sampling procedure
Literature data and stochiometric calculation.

## Review by Eric Johnson 2012-02-10
I am satisfied with the revisions.
