# cement production, CEM IV/A

Dataset: EcoSpold 2, unit process
Geography: RoW
Time period: 2005-01-01 to 2022-12-31
Technology level: current
Classification: ISIC rev.4 ecoinvent: 2394:Manufacture of cement, lime and plaster
Synonyms: Pozzolanic cement; CEM IV/A
Tags: combined production
Scenario: Business-as-Usual
System model: Substitution, consequential, long-term
Share of production covered: 100 %
Generated by: Michael Elias Boesch
Published in: Boesch, M.E. 2010
Database: ecoinvent
isCopyrightProtected: true
accessRestrictedTo: 1

## General comment
The dataset describes the production of cement (CEM IV/A).

## Included activities start
From cradle, i.e. including all upstream activities. As source of gypsum, waste gypsum from flue gas treatment is assumed.

## Included activities end
This activity ends with the cement produced in the cement mill. The dataset does not include packaging and administration.

## Reference product
- cement, CEM IV/A: 1 kg; By-product classification allocatable product; CPC 37440: Portland cement, aluminous cement, slag cement and similar hydraulic cements, except in the form of clinkers
  production volume 5.05645e10 kg
  properties: carbon allocation 0 kg, carbon content 0, carbon content, fossil 0, carbon content, non-fossil 0, dry mass 1 kg, price 0.0615 EUR2005, water content 0, water in wet mass 0 kg, wet mass 1 kg

## Inputs from technosphere
- cement factory: 5.36e-11 unit; lognormal variance with pedigree 0.3032, pedigree (2,1,3,4,1)
- clinker: 0.7315 kg; lognormal variance with pedigree 0.0053, pedigree (3,3,3,3,1)
  properties: dry mass 1 kg, wet mass 1 kg
- electricity, medium voltage: 0.00313531, 0.000117308, 0.00149044, 0.0258684, 0.00217211, 0.000116424 kWh (6 suppliers, which the file names only by identifier); sum of these 0.0329 kWh; lognormal variance with pedigree 0.0053, pedigree (3,3,3,3,1)
- ethylene glycol: 0.00021 kg; lognormal variance with pedigree 0.0053, pedigree (3,3,3,3,1)
  properties: carbon content, fossil 0.387097, dry mass 1 kg, heating value, net 23.44 MJ, wet mass 1 kg
- gypsum, mineral: 0.000176136, 0.0375396, 0.00078423 kg (3 suppliers, which the file names only by identifier); sum of these 0.0385 kg; lognormal variance with pedigree 0.0053, pedigree (3,3,3,3,1)
  properties: dry mass 1 kg, wet mass 1 kg
- steel, low-alloyed: 0.00011 kg; lognormal variance with pedigree 0.0053, pedigree (3,3,3,3,1)
  properties: carbon content, fossil 0.005, dry mass 1 kg, wet mass 1 kg

## Emissions to nature
- Heat, waste [air, unspecified]: 0.118 MJ; lognormal variance with pedigree 0.0447, pedigree (3,3,3,3,1)

## Sampling procedure
Data approximates average European production
