# transport, freight, lorry 16-32 metric ton, EURO3

Dataset: EcoSpold 2, unit process
Geography: BR
Time period: 2020-03-01 to 2022-02-28
Technology level: current
Classification: ISIC rev.4 ecoinvent: 4923:Freight transport by road
Scenario: Business-as-Usual
System model: Substitution, consequential, long-term
Share of production covered: 100 %
Generated by: F. Valebona; T. B. Rocha; F. L. Motta
Published in: Valebona, F. 2021
Database: ecoinvent
isCopyrightProtected: true
accessRestrictedTo: 1

## General comment
This dataset is an adaptation of “transport, freight, lorry 16-32 metric ton, EURO3” in Europe, as available in version 3.6 of the ecoinvent database to reflect the situation in Brazil. It represents the service of 1tkm freight transport in a lorry of the size class 16-32 metric tons gross vehicle weight (GVW) and Euro 3 emissions class.
The Brazilian lorry fleet is regulated under the Vehicles Air Pollution Control Program – Proconve, which phases are equivalent to the European control program – EURO. Since 2012, the Proconve P7 (EURO 5) phase is in practice, while the P8 phase (EURO 6) will start in 2023. Before that, the Proconve P6 phase (EURO 4) was not implemented because of the unavailability of low-sulphur diesel, therefore recontextualized datasets do not consider this phase. The P5 (EURO 3), P4 (EURO 2) and P3 (EURO 1) phases started in 2005, 2000 and 1996, respectively. Prior technologies are classified as unregulated.
For the dataset recontextualization to the Brazilian reality, an updated average freight load and the diesel with 500 ppm of sulfur and 12% biodiesel blend are considered. Moreover, data from emission tests of the national vehicle production and import (CETESB, 2019) is used to update regulated emissions (carbon monoxide, particulate matter and nitrogen oxides). Furthermore, correction factors are used to consider the impact of biodiesel blend on exhaust emissions (USEPA 2002), and the fuel composition is considered to account for carbon dioxide and sulphur dioxide emission.
The vehicle mass category classification considered in Brazilian national statistics is approximated to the one adopted in ecoinvent datasets. The 16-32 metric ton lorry is representing the Brazilian heavy-duty lorry with gross vehicle weight (GVW) larger than 15 metric tons and combined gross vehicle weight (CGVW) lower than 40-ton category classification. For the Brazilian classification, CGVW refers to the total weight of the combinations of vehicles, i.e. trailers. The average capacity utilization factor (including empty trips) for this category is 60.5 % according to the Road Freight Transport Model from the Brazilian Energy Research Enterprise – EPE (Stukart, 2018). Whereas, the average payload capacity for this category is 12.8 ton (Novo, 2016), resulting in an average freight load of 7.75 ton. GWV is estimated by assuming the same empty vehicle weight as for the RER region for the respective matching categories and accounting for the updated freight load. This resulted in a GWV of 17.7 ton. Vehicle mass dependent non-exhaust emissions (i.e. tyre, brake and road wear) are adjusted accordingly.
The emissions of carbon monoxide (CO), nitrogen oxides (NOx) and Particulate Matter (PM) were updated with data from (CETESB, 2019), which uses data from emission testing of the national vehicle fleet production and imports, weighted by sales amounts. Those tests are run with a reference fuel, which is not blended with biodiesel (ANP, 2018), therefore, those emission factors are adjusted for emissions from burning biodiesel.
The impact of the 12% biodiesel blend in exhaust emissions is accounted for by correction factors derived from USEPA (2002). Correction factors were calculated for the emissions of nitrogen oxides, particulate matter, hydrocarbons, carbon monoxide, acetaldehyde, ethylbenzene, formaldehyde, naphthalene and xylene. Moreover, fuel consumption was corrected with energy content values. For conventional diesel, it was considered energy content of 129.500 Btu/gal, animal-based biodiesel 115.720 Btu/gal and plant-based biodiesel 119.216 Btu/gal (USEPA 2002).
Fuel dependent emissions were updated as well. In Brazil, diesel containing 10 ppm (S10) of sulphur was introduced to attend to the demand of EURO V lorries, as its post-treatment technologies require the use of ultra-low sulphur diesel. Diesel containing 500 ppm (S500) of sulphur is also commercialized for the remaining lorry emission categories. For these cases, the use of S500 is assumed as no information on the share of S500 and S10 diesel used by these categories was available and because the price of S500 is lower than for the S10 (CNT, 2021). Therefore, sulphur dioxide emissions derived from S500 combustion were corrected assuming that all sulphur is emitted as SO2 (0.001 kg SO2/kg fossil diesel) and to account for the blend of biodiesel (12 %), which does not contain sulphur. Carbon dioxide emission is dependent on the fuel carbon content, which was considered as 77.8% for plant-based biodiesel and 76.1 % for animal-based biodiesel, resulting in a Brazilian average of 77.5%, while conventional diesel has 86.7% of carbon (USEPA, 2002). This results in emissions of 3.18 kg of fossil CO2/kg diesel and 2.84 biogenic CO2/kg biodiesel.
This dataset was developed under the Cornerstone project, an initiative from the Brazilian Business Network on Life cycle Assessment (Rede ACV) in collaboration with ecoinvent to increase the quantity and quality of inventories that represent Brazil, through a thorough adaptation of the datasets. More information about this project is available in redeacv.org.br/en/wg-database/. Technical background is provided in Valebona F.; Rocha T.B.; Motta F. L. Cornerstone Project. Recontextualization of Datasets: Methodology. ACV Brasil, Brazil.
Main data sources for the recontextualization:
ANP, 2018. Agência Nacional do Petróleo, Gás Natural e Biocombustíveis (2018). RANP 764. RESOLUÇÃO ANP Nº 764, DE 20.12.2018 - DOU 21.12.2018.
EPE, 2020. Energy Research Enterprise (2020). Integrated Transport Model. Consultation through Information to Citizen System. Federal Government of Brazil.
Stukart, B., Lima, C., Pacheco, C., Silva, F., Antoniasse, G., Cavalcanti, M., Souza, M., Stelling, P. (2018). Transporte Rodoviário Brasileiro, Transição para Óleo Diesel S10 e Desafios para o Refino Nacional. Rio Oil&Gas. Available at: https://stt.ibp.org.br/eventos/2018/riooil2018/pdfs/Riooil2018_1654_201806222325ibp1654_1 8_transic.pdf. Acessed in: 06/06/2020.
CETESB (2019). Companhia Ambiental do Estado de São Paulo (2019). Emissões Veiculares no Estado de São Paulo. Governo do Estado de São Paulo. Available at: https://cetesb.sp.gov.br/veicular/relatoriose-publicacoes/. Accessed in 15/06/2020.
USEPA, 2002. United States Environmental Protection Agency (2002). A Comprehensive Analysis of Biodiesel Impacts on Exhaust Emissions. Draft Technical Report.
Novo, A. L. (2016). PERSPECTIVAS PARA O CONSUMO DE COMBUSTÍVEL NO TRANSPORTE DE CARGA NO BRASIL: UMA COMPARAÇÃO ENTRE OS EFEITOS ESTRUTURA E INTENSIDADE NO USO FINAL DE ENERGIA DO SETOR. Available at: http://www.ppe.ufrj.br/images/publica%C3%A7%C3%B5es/mestrado/Ana_Luiza_Andrade_Novo.pdf
CNT (2021). CNT acompanha, com atenção, a alta histórica do diesel. Available at: cnt.org.br/agencia-cnt/cnt-acompanha-alta-historica-do-diesel

## Included activities start
From combustion of fuel in the engine. The dataset takes as input the infrastructure of the lorry and road network, the materials and efforts needed for maintenance of these and the fuel consumed in the vehicle for the journey.

## Included activities end
The activity ends with the transport service of 1tkm and the emissions of exhaust and non-exhaust emissions into air, water and soil.

## Geography
Recontextualization from 'transport, freight, lorry 16-32 metric ton, EURO3, RER'. Fuel type, freight load factor, regulated and fuel-dependent emissions were updated for the Brazilian situation. The environmental interventions due to vehicle transport are modelled by linking the environmental interventions due to vehicle operation with impacts due to vehicle manufacturing, vehicle maintenance, vehicle disposal, road construction, operation and maintenance of roads and road disposal.

## Technology
Diesel and diesel engine. Lorry transport is further differentiated with respect to vehicle weight and emission technology standard (EURO-standard).
Technology classifications are based on those used widely within the works of the European Environment Agency, particularly in the Emissions Inventory Guidebook.

## Time period
Validity period of the 12% biodiesel blend regulation. The regulation foresees incremental increases in the biodiesel content in the Brazilian market fuel (it started with a 2% blend in 2008, reached 12% in 2020 and will increase 1% a year, until it reaches 15% in 2023).

## Reference product
- transport, freight, lorry 16-32 metric ton, EURO3: 1 metric ton*km; By-product classification allocatable product; CPC 6511: Road transport services of freight
  production volume 1.54552e11 metric ton*km
  properties: carbon allocation 0 kg, carbon content 0, price 0.0294368 EUR2005

## Inputs from technosphere
- brake wear emissions, lorry: -1.86161e-5 kg; lognormal variance with pedigree 0.0207, pedigree (3,2,4,5,3)
  properties: carbon content, fossil 0.149, dry mass 1 kg, wet mass 1 kg
- diesel: 0.0251363 kg; lognormal variance with pedigree 0.0193, pedigree (2,2,5,5,3)
  properties: carbon content, fossil 0.865, dry mass 1 kg, heating value, net 42.8 MJ, wet mass 1 kg
- fatty acid methyl ester: 0.00342768 kg; lognormal variance with pedigree 0.0193, pedigree (2,2,5,5,3)
  properties: carbon content, fossil 0.041, carbon content, non-fossil 0.732, dry mass 1 kg, wet mass 1 kg
- lorry, 28 metric ton: 2.3907e-7 unit; lognormal variance with pedigree 0.32, pedigree (3,1,5,5,3)
- maintenance, lorry 28 metric ton: 2.3907e-7 unit; lognormal variance with pedigree 0.328, pedigree (3,5,5,5,3)
- road: 0.00105 m*year; lognormal variance with pedigree 0.32, pedigree (3,1,5,5,3)
- road maintenance: 0.00016674 m*year; lognormal variance with pedigree 0.328, pedigree (3,5,5,5,3)
- road wear emissions, lorry: -1.60286e-5 kg; lognormal variance with pedigree 0.0207, pedigree (3,2,4,5,3)
  properties: carbon content, fossil 0.75, dry mass 1 kg, wet mass 1 kg
- tyre wear emissions, lorry: -0.000184444 kg; lognormal variance with pedigree 0.0207, pedigree (3,2,4,5,3)
  properties: carbon content, fossil 0.675, dry mass 1 kg, wet mass 1 kg

## Emissions to nature
- Acetaldehyde [air, unspecified]: 1.20684e-6 kg; lognormal variance with pedigree 0.0193, pedigree (2,2,5,5,3)
- Acrolein [air, unspecified]: 4.67419e-7 kg; lognormal variance with pedigree 0.0193, pedigree (2,2,5,5,3)
- Ammonia [air, unspecified]: 3.87335e-7 kg; lognormal variance with pedigree 0.0193, pedigree (2,2,5,5,3)
- Arsenic ion [air, unspecified]: 2.82769e-12 kg; lognormal variance with pedigree 0.0193, pedigree (2,2,5,5,3)
- Benzaldehyde [air, unspecified]: 3.61787e-7 kg; lognormal variance with pedigree 0.0193, pedigree (2,2,5,5,3)
- Benzene [air, unspecified]: 1.84855e-8 kg; lognormal variance with pedigree 0.0193, pedigree (2,2,5,5,3)
- Butane [air, unspecified]: 3.96118e-8 kg; lognormal variance with pedigree 0.0193, pedigree (2,2,5,5,3)
- Cadmium II [air, unspecified]: 2.46009e-10 kg; lognormal variance with pedigree 0.7187, pedigree (2,2,5,5,3)
- Carbon dioxide, fossil [air, unspecified]: 0.0797679 kg; lognormal variance with pedigree 0.0606, pedigree (3,5,5,5,3)
- Carbon dioxide, non-fossil [air, unspecified]: 0.00972427 kg; lognormal variance with pedigree 0.0606, pedigree (3,5,5,5,3)
- Carbon monoxide, fossil [air, unspecified]: 8.94063e-5 kg; lognormal variance with pedigree 0.0013, pedigree (2,2,2,1,1)
- Carbon monoxide, non-fossil [air, unspecified]: 1.21918e-5 kg; lognormal variance with pedigree 0.0013, pedigree (2,2,2,1,1)
- Chromium III [air, unspecified]: 8.48301e-10 kg; lognormal variance with pedigree 0.7187, pedigree (2,2,5,5,3)
- Chromium VI [air, unspecified]: 1.69661e-12 kg; lognormal variance with pedigree 0.7187, pedigree (2,2,5,5,3)
- Copper ion [air, unspecified]: 5.99469e-10 kg; lognormal variance with pedigree 0.7187, pedigree (2,2,5,5,3)
- Dinitrogen monoxide [air, unspecified]: 6.21696e-7 kg; lognormal variance with pedigree 0.0272, pedigree (2,5,5,5,3)
- Ethane [air, unspecified]: 7.92238e-9 kg; lognormal variance with pedigree 0.0193, pedigree (2,2,5,5,3)
- Formaldehyde [air, unspecified]: 2.21826e-6 kg; lognormal variance with pedigree 0.0272, pedigree (2,5,5,5,3)
- Heptane [air, unspecified]: 7.92238e-8 kg; lognormal variance with pedigree 0.0193, pedigree (2,2,5,5,3)
- Lead II [air, unspecified]: 1.47322e-9 kg; lognormal variance with pedigree 0.7187, pedigree (2,2,5,5,3)
- Mercury II [air, unspecified]: 1.49868e-10 kg; lognormal variance with pedigree 0.7187, pedigree (2,2,5,5,3)
- Methane, fossil [air, unspecified]: 6.49373e-7 kg; lognormal variance with pedigree 0.0272, pedigree (2,5,5,5,3)
- NMVOC, non-methane volatile organic compounds [air, unspecified]: 2.14511e-5 kg; lognormal variance with pedigree 0.0193, pedigree (2,2,5,5,3)
- Nickel II [air, unspecified]: 2.48836e-10 kg; lognormal variance with pedigree 0.7187, pedigree (2,2,5,5,3)
- Nitrogen oxides [air, unspecified]: 0.000589115 kg; lognormal variance with pedigree 0.0013, pedigree (2,2,2,1,1)
- PAH, polycyclic aromatic hydrocarbons [air, unspecified]: 2.21125e-9 kg; lognormal variance with pedigree 0.7187, pedigree (2,2,5,5,3)
- Particulate Matter, < 2.5 um [air, unspecified]: 9.83461e-6 kg; lognormal variance with pedigree 0.0013, pedigree (2,2,2,1,1)
- Pentane [air, unspecified]: 1.58447e-8 kg; lognormal variance with pedigree 0.0193, pedigree (2,2,5,5,3)
- Propane [air, unspecified]: 2.64079e-8 kg; lognormal variance with pedigree 0.0193, pedigree (2,2,5,5,3)
- Selenium IV [air, unspecified]: 2.82769e-12 kg; lognormal variance with pedigree 0.7187, pedigree (2,2,5,5,3)
- Styrene [air, unspecified]: 1.47884e-7 kg; lognormal variance with pedigree 0.0193, pedigree (2,2,5,5,3)
- Sulfur dioxide [air, unspecified]: 2.51363e-5 kg; lognormal variance with pedigree 0.0026, pedigree (3,1,2,1,1)
- Toluene [air, unspecified]: 2.64079e-9 kg; lognormal variance with pedigree 0.0193, pedigree (2,2,5,5,3)
- Zinc II [air, unspecified]: 4.91451e-8 kg; lognormal variance with pedigree 0.7187, pedigree (2,2,5,5,3)
- m-Xylene [air, unspecified]: 2.58797e-7 kg; lognormal variance with pedigree 0.0193, pedigree (2,2,5,5,3)
- o-Xylene [air, unspecified]: 1.05632e-7 kg; lognormal variance with pedigree 0.0272, pedigree (2,5,5,5,3)

## Sampling procedure
Literatura data is used to update regulated exhaust emissions and freight load factors. Furthermore, correction factors are used to consider the impact of biodiesel blend on exhaust emissions. Refer to General Comment section for detailed recontextualization methodology.

## Extrapolations
Apart from particulate matter, carbon monoxide, sulfur dioxide, and carbon dioxide, exhaust emissions are extrapolated from an original dataset covering the geography RER. Infrastructure and maintenance information are also extrapolated from the geography RER. Fuel use and emission factors were adapted considering the 12% biodiesel blend, however original emission factors references are from earlier periods. The uncertainty has been adjusted accordingly.

## Review by Christian Bauer 2021-03-29
passed
