# electricity production, hydro, reservoir, tropical region

Dataset: EcoSpold 2, unit process
Geography: BR-North-eastern grid
Time period: 2014-01-01 to 2022-12-31
Technology level: modern
Classification: ISIC rev.4 ecoinvent: 3510:Electric power generation, transmission and distribution
Tags: hydro power
Scenario: Business-as-Usual
System model: Substitution, consequential, long-term
Generated by: Henrique Rogerio Antunes de Souza Junior
Published in: Bolliger, R. 2007
Database: ecoinvent
isCopyrightProtected: true
accessRestrictedTo: 1

## General comment
This dataset represents the production of high voltage electricity at grid-connected reservoir hydropower plants on the Brazil-North-eastern in 2014.
The data about production was obtained in Matrizes Elétricas Estaduais: Ano Referência 2015 and Capacidade Instalada de Geração Elétrica Brasil e Mundo (2014): Ano Referência 2014. MME (2015; 2016).
The data about emissions was obtained in Projeto BALCAR: Emissões de Gases de Efeito Estufa em Reservatórios de Centrais Hidrelétricas. BRASIL (2014).
The data about water was obtained in Relatório de Sustentabilidade 2014. Itaipu Binacional. ITAIPU (2014).
ITAIPU (2014). Relatório de Sustentabilidade 2014. Itaipu Binacional.
BRASIL (2014). Projeto BALCAR: Emissões de Gases de Efeito Estufa em Reservatórios de Centrais Hidrelétricas. Agência Nacional de Energia Elétrica – ANEEL.
MME (2015). Capacidade Instalada de Geração Elétrica Brasil e Mundo (2014): Ano Referência 2014. Edição de 05 de março de 2015. Ministério De Minas E Energia – MME. Secretaria De Planejamento E Desenvolvimento Energético. Núcleo De Estudos Estratégicos De Energia.
MME (2016). Matrizes Elétricas Estaduais: Ano Referência 2015. Edição de 23 de novembro de 2016. Ministério De Minas E Energia – MME. Secretaria De Planejamento E Desenvolvimento Energético. Núcleo De Estudos Estratégicos De Energia.
The original ecoinvent dataset used as a basis was 'electricity production, hydro, reservoir, tropical region, BR, 1990 - 2015' and it has been copied in '12/2017'
[This dataset is meant to replace the following datasets:]

## Included activities start
This dataset starts from the power plant ready to produce electricity, i.e. the reservoir filled with water.
From (potential) energy in water, entering the power plant.

## Included activities end
This activity ends with 1kWh of high voltage electricity produced at the power plant and arrived at the busbar.

This dataset includes
- the area/volume occupied for the barrage, power station, and the lake
- an estimation of emissions of carbon dioxide and methane
- operation and maintenance activities and materials of the power plants, such as lubricating oil or mass of water passing through the turbines.

This dataset doesn't include
- land use for access roads to the reservoir
- raw materials extraction, decommissioning and waste treatment as these activities are already included in the infrastructure datasets
- transformation of the electricity produced.
- dinitrogen oxide emissions

## Time period
The Annual Production Volume is valid for the year 2014.

## Parameters
- gross electricity production: 2.84262e10 kWh; name gross_electricity; = (93816000000*0.30)*(1+losses_gross_net); lognormal variance with pedigree 0.0019, pedigree (2,2,1,1,2)
  The data about production was obtained in Matrizes Elétricas Estaduais: Ano Referência 2015. MME (2016).
  equation: (annual production total * hydro(%)) * 1% losses
  MME (2016). Matrizes Elétricas Estaduais: Ano Referência 2015. Edição de 23 de novembro de 2016. Ministério De Minas E Energia - MME. Secretaria De Planejamento E Desenvolvimento Energético. Núcleo De Estudos Estratégicos De Energia.
- lifetime: 150 year; lognormal variance with pedigree 0.0014, pedigree (2,2,1,3,1)
  Estimation based on experiences.
  nan
- losses from gross electricity production: 0.01 dimensionless; name losses_gross_net; lognormal variance with pedigree 0.003225, pedigree (3,3,1,2,1)
  Literature value. Generic value taken from the IEA Electricity information 2014, part I, p. I.7: 'The difference between gross and net electricity production is generally observed to be about 7% for conventional thermal stations, 1% for hydro stations and 6% for nuclear.'
  IEA/OECD. 2014. Electricity Information 2014. International Energy Agency (IEA), Paris Cedex (FR).
  nan

## Reference product
- electricity, high voltage: 1 kWh; By-product classification allocatable product; CPC 17100: Electrical energy
  production volume 2.12014e10 kWh
  properties: carbon allocation 0 kg, carbon content 0, price 0.0977 EUR2005

## Inputs from technosphere
- hydropower plant, reservoir, non-alpine regions: 4.0404e-13 unit; lognormal variance with pedigree 0.042, pedigree (1,1,3,5,1)
- lubricating oil: 7.56e-6 kg; lognormal variance with pedigree 0.0981, pedigree (4,2,3,5,3)
  properties: carbon content, fossil 0.75, dry mass 1 kg, heating value, net 40.2 MJ, wet mass 1 kg
- waste mineral oil: -7.56e-6 kg; lognormal variance with pedigree 0.0382, pedigree (4,5,2,5,1)
  properties: carbon content, fossil 0.864444, dry mass 0.9 kg, heating value, net 34.7 MJ, water content 0.111111, wet mass 1 kg

## Inputs from nature
- Energy, potential (in hydropower reservoir), converted [natural resource, in water]: 3.79 MJ
- Occupation, lake, artificial [natural resource, land]: 0.0600228 m2*year; lognormal variance with pedigree 0.072, pedigree (1,1,3,5,1)
- Transformation, from forest, unspecified [natural resource, land]: 0.000400152 m2; lognormal variance with pedigree 0.1434, pedigree (3,3,4,1,2)
- Transformation, to industrial area [natural resource, land]: 3.9619e-6 m2; lognormal variance with pedigree 0.1582, pedigree (4,5,4,5,1)
- Transformation, to lake, artificial [natural resource, land]: 0.00039619 m2; lognormal variance with pedigree 0.1434, pedigree (3,3,4,1,2)
- Volume occupied, reservoir [natural resource, in water]: 0.926775 m3*year; lognormal variance with pedigree 0.3034, pedigree (3,3,4,1,2)
- Water, turbine use, unspecified natural origin [natural resource, in water]: 3.61638 m3; lognormal variance with pedigree 0.0221, pedigree (2,3,4,3,2)

## Emissions to nature
- Carbon dioxide, from soil or biomass stock [air, non-urban air or from high stacks]: 0.0285 kg; lognormal variance with pedigree 0.0987, pedigree (5,3,5,3,3)
- Methane, non-fossil [air, non-urban air or from high stacks]: 0.00136 kg; lognormal variance with pedigree 0.0987, pedigree (5,3,5,3,3)
- Water [air, unspecified]: 0.0292217 m3; lognormal variance with pedigree 0.0407, pedigree (2,2,3,1,1)
- Water [water, unspecified]: 3.58716 m3; lognormal variance with pedigree 0.092025, pedigree (4,4,4,2,4)

## Sampling procedure
literature and annual reports

## Extrapolations
Some data was extrapolated proportionally to the generation of each region.

Updated data for regionalization of Brazil (2014-2017):
- Annual Production Volume (specific data)
- Transformation, from forest (specific data)
- Transformation, to lake (specific data)
- Volume occupied (specific data)
- Water, turbine use (specific data)

## Review by Christopher Oberschelp 2017-12-19
Dataset now seems to be of good quality with proper documentation. Indiviudal issues might still be spotted by comparison with suitable reference datasets at a later stage. Uncertainty might still need adjustments (as agreed upon with ecoinvent).
