# electricity production, wind, 1-3MW turbine, offshore

Dataset: EcoSpold 2, unit process
Geography: RoW
Time period: 2000-01-01 to 2022-12-31
Technology level: modern
Classification: EcoSpold01Categories: wind power/power plants
Classification: ISIC rev.4 ecoinvent: 3510:Electric power generation, transmission and distribution
Tags: wind power
Scenario: Business-as-Usual
System model: Substitution, consequential, long-term
Generated by: Karin Treyer
Published in: Burger, B. 2007
Database: ecoinvent
isCopyrightProtected: true
accessRestrictedTo: 1

## General comment
This dataset represents the production of high voltage electricity at offshore grid-connected wind power plants worldwide in 2012. It includes operation and maintenance expenditures as well as infrastructure inputs. Wind load hours have been adapted to local conditions (see parameters).
At the moment, the offshore wind turbines are approximated with a 2MW wind turbine.
According to The Wind Power Database (2014), total installed wind capacity on-and offshore worldwide in the end of 2014 amounted to 312228.392 MW. According to The Wind Power Database 2014, around 3% of the capacity is installed offshore. Percentages of the three onshore wind power plant classes modelled in ecoinvent referring to the total installed capacity (12015 wind farms by 12/2014): <1MW 14.5%; 1-3MW 70.6%; >3MW 11.9%. These values are based on 54 countries analysed in the database: AT, AU, BE, BG, BR, CA, CH, CL, CN, CY, DE, DK, EE, ES, FI, FR, GB, GR, HR, HU, ID, IE, IN, IR, IT, JP, KR, LT, LU, LV, MK, MT, MX, MY, NL, NO, PE, PL, PT, RO, RS, RU, SA, SE, SI, SK, TH, TR, TW, TZ, UA, US, ZA. [Retreived from The Wind Power. 2014. Windpower and wind farms database. www.thewindpower.net, Status December 2014]
[This dataset is meant to replace the following datasets:]

## Included activities start
From operation of the wind power plant to high voltage electricity at the plant. According to (European Communities 2001), electricity produced with wind turbines in a wind power plant is connected to medium voltage or high voltage systems, depending on the size of the windfarm. Normally, each wind turbine contains a transformer from low voltage to medium voltage. The network connection additionally transforms the electricity to high voltage electricity. It is assumed here, that there are no stand-alone grid-connected small wind turbines and that all electricity is connected to the network in form of high voltage electricity.

Source:
European Communities. 2001. Wind Turbine Grid Connection and Interaction. Deutsches Windenergie-Institut /Tech-wise A/S /DM Energy, p. 7 Tab.2.1

## Included activities end
This activitiy ends with 1 kWh of produced electricity at the power plant. The dataset includes lubricating oil from maintenance of the installation. The dataset doesn't include the land use as shipping is assumed to be restricted to a small extent.

## Technology
Technical details of the modeled 2 MW offshore wind power plant

References:
Stiesdal H. (2001) Middelgrunden Offshore. A newsletter for customers and business associates, Bonus energy A/S. General technical description, Technical specification, Drawings and design, Bonus 2 MW offshore. Isager/Bogtryt/Offset, Svendborg, Denmark. www.bonus.dk

## Parameters
- Percentage of onshore wind power plant class capacity on total: 1 dimensionless; name percentage_class_onshore; lognormal variance with pedigree 0.0037, pedigree (3,2,1,1,2)
  Literature value/calculated value. Percentage of installed capacity with onshore wind turbines < 1MW on total installed wind capacity installed in this geography (see general comment for percentages in other size classes).
  Source:
  The Wind Power. 2014. Windpower and wind farms database. www.thewindpower.net, Status December 2014
  Percentage of the wind power plant class energy production on total wind power production in a country. Classes: <1MW, 1-3MW, >3MW. Values for onshore wind power plants.
- gross electricity production: 1.1313e12 kWh; name gross_electricity; lognormal variance with pedigree 0.0018, pedigree (2,1,1,1,2)
  Literature value/statistics. Gross electricity production 2012 with wind power. For all OECD countries, the OECD iLibrary 2014 provides data on electricity production with wind power plants (gross values 2012).
  For all non-OECD countries and the world, this value is given in the Energy Statistics of non-OECD countries.
  OECD. 2014. IEA Electricity Information Statistics: OECD - Electricity and heat generation. OECD iLibrary. Online database. DOI : 10.1787/elect-data-en
  IEA/OECD. 2014. Energy statistics of non-OECD countries 2014. International Energy Agency (IEA), Paris Cedex (FR).
  nan
- losses from gross electricity production: 0.01 dimensionless; name losses_gross_net; lognormal variance with pedigree 0.0113, pedigree (3,3,1,3,3)
  Estimation. The factor for the loss of electricity from gross to net electricity production is an assumption based on experiences, statistics and expertise (1% losses for wind).
  nan

## Reference product
- electricity, high voltage: 1 kWh; By-product classification allocatable product; CPC 17100: Electrical energy
  production volume 1.10584e12 kWh
  properties: carbon allocation 0 kg, carbon content 0, price 0.0977 EUR2005

## Inputs from technosphere
- lubricating oil: 5.75e-5 kg; lognormal variance with pedigree 0.04, pedigree (1,1,3,1,1)
  properties: carbon content, fossil 0.75, dry mass 1 kg, heating value, net 40.2 MJ, wet mass 1 kg
- waste mineral oil: -5.38561e-7, -5.69614e-5 kg (2 suppliers, which the file names only by identifier); sum of these -5.75e-5 kg; lognormal variance with pedigree 0.06, pedigree (1,1,1,1,1)
  properties: carbon content, fossil 0.864444, dry mass 0.9 kg, heating value, net 34.7 MJ, water content 0.111111, wet mass 1 kg
- wind power plant, 2MW, offshore, fixed parts: 9.5e-9 unit; lognormal variance with pedigree 0.01, pedigree (1,1,3,1,1)
- wind power plant, 2MW, offshore, moving parts: 9.5e-9 unit; lognormal variance with pedigree 0.01, pedigree (1,1,3,1,1)

## Inputs from nature
- Energy, kinetic (in wind), converted [natural resource, in air]: 3.87 MJ

## Sampling procedure
Based on literature and on electricity production statistics.

## Review by Carl Vadenbo 2015-05-27
The update of the whole electricity sector for the ecoinvent v3.2 database consist of hundreds of datasets. All these datasets have passed through a streamlined review processes where the underlying modelling of production volumes, technology shares and efficiencies was reviewed in detail prior to the datasets being submitted to the database.
