# polycarbonate production

Dataset: EcoSpold 2, unit process
Geography: RoW
Time period: 2016-01-01 to 2024-12-31
Technology level: current
Classification: EcoSpold01Categories: plastics/polymers
Classification: ISIC rev.4 ecoinvent: 2013:Manufacture of plastics and synthetic rubber in primary forms
Scenario: Business-as-Usual
System model: Substitution, consequential, long-term
Generated by: Nikolia Stoikou
Database: ecoinvent
isCopyrightProtected: true
accessRestrictedTo: 1

## General comment
The dataset represents the production of polycarbonate (PC), a polymer composed of identical units of bisphenol A. PC is a strong, ductile, thermally stable, transparent, flame-resistant thermoplastic polymer. Thanks to these characteristics it is widely used in buildings, electrical appliances, and electronics, automotive, packaging, medical devices, etc. Polycarbonate can be worked with traditional extrusion and injection moulding (PlasticsEurope 2019).
Reference:
PlasticsEurope, 2019.Polycarbonate (PC), Eco-profiles and Environmental Product Declaration of the European Plastics Manufacturers Available at: https://www.plasticseurope.org/en/resources/eco-profiles

## Included activities start
The activity starts when Bisphenol reaches the production plant. The process includes input materials, energy consumption, water consumption, production infrastructure, end-of-life as well as air and water emissions.

## Included activities end
The activity ends with polycarbonate ready to be supplied in the market.

## Geography
3 European production sites

## Technology
Polycarbonate is produced via a interfacial polycondesation. Bisphenol A is treated with sodium hydroxide, the resulting diphenoxide reacts with phosgene. The assumed reaction efficiency is of 98%.
Material inputs for the reaction are calculated stoichiometrically. Energy requirements are sourced from Mooij and Muller, 2021. Water use is based on PlasticsEurope, 2019.
Reference:
Mooij and Muller, 2021. Decarbonisation options for the Dutch polycarbonate industry, PBL Netherlands Environmental Assessment Agency, TNO Available at: https://www.pbl.nl/sites/default/files/downloads/pbl-2021-decarbonisation-options-for-the-dutch-polycarbonate-industry-4580.pdf
PlasticsEurope, 2019.Polycarbonate (PC), Eco-profiles and Environmental Product Declaration of the European Plastics Manufacturers Available at: https://www.plasticseurope.org/en/resources/eco-profiles

## Parameters
- fraction, cooling water, cooling pond system, to air: 0.032 dimensionless; name fraction_CW_CP_to_air; lognormal variance with pedigree 0.0413, pedigree (2,3,1,3,1)
  Calculated based on literature value (Scown, C.D., 2011, Water Footprint of U.S. Transportation Fuels and supplying information of the article) (Vionnet, S., Quantis Water Database - Technical Report, 2012).
- fraction, cooling water, once-through system, to air: 0.004 dimensionless; name fraction_CW_OT_to_air; lognormal variance with pedigree 0.0413, pedigree (2,3,1,3,1)
  (same comment as for fraction, cooling water, cooling pond system, to air)
- fraction, cooling water, recirculating system, to air: 0.771 dimensionless; name fraction_CW_R_to_air; lognormal variance with pedigree 0.0413, pedigree (2,3,1,3,1)
  (same comment as for fraction, cooling water, cooling pond system, to air)
- fraction, cooling water, to air: 0.3875 dimensionless; name fraction_CW_to_air; = (0.5*fraction_CW_OT_to_air)+(0.5*fraction_CW_R_to_air); lognormal variance with pedigree 0.092025, pedigree (4,4,3,2,4)
  Calculated value based on literature value (see comments of the other parametres present in this dataset) and expert opinion. In the case when no industry/literature data are available about the type of cooling or directly fraction, cooling water, to air specific for the process a default assumption is applied. It is assumed that the once-through cooling system is used in 50% of all cases and recirculating system is used in another 50% of all cases.
- fraction, process water, to air: 0.205 dimensionless; lognormal variance with pedigree 0.092025, pedigree (4,4,3,2,4)

## Reference product
- polycarbonate: 1 kg; By-product classification allocatable product; CPC 34740: Polyacetals, other polyethers and epoxide resins, in primary forms; polycarbonates, alkyd resins, polyallyl es[…]
  production volume 3.83e9 kg
  properties: carbon allocation 0.755906 kg, carbon content 0.755906, carbon content, fossil 0.755906, carbon content, non-fossil 0, dry mass 1 kg, heating value, net 29.57 MJ, price 1.29 EUR2005, water content 0, water in wet mass 0 kg, wet mass 1 kg

## Inputs from technosphere
- bisphenol A, powder: 0.916 kg; lognormal variance with pedigree 0.0118, pedigree (2,5,1,5,2)
  properties: carbon content, fossil 0.789474, dry mass 1 kg, heating value, net 32.41 MJ, wet mass 1 kg
- chemical factory, organics: 4e-10 unit; lognormal variance with pedigree 0.478, pedigree (4,5,5,5,5)
- electricity, medium voltage: 0.00966218, 0.000361512, 0.00459313, 0.0797194, 0.00669385, 0.000358786 kWh (6 suppliers, which the file names only by identifier); sum of these 0.101389 kWh; lognormal variance with pedigree 0.0044, pedigree (2,3,1,5,2)
- heat, from steam, in chemical industry: 6.05 MJ; lognormal variance with pedigree 0.0044, pedigree (2,3,1,5,2)
  properties: heating value, net 1 MJ
- phosgene, liquid: 0.39691 kg; lognormal variance with pedigree 0.0118, pedigree (2,5,1,5,2)
  properties: carbon content, fossil 0.122449, dry mass 1 kg, heating value, net 3.68 MJ, wet mass 1 kg
- sodium hydroxide, without water, in 50% solution state: 0.320985 kg; lognormal variance with pedigree 0.0118, pedigree (2,5,1,5,2)
  properties: dry mass 1 kg, heating value, net 3.03 MJ, wet mass 1 kg
- waste plastic, mixture: -0.00250818, -0.0175586, -6.57303e-5, -6.92194e-5, -1.26743e-5, -0.000167587, -2.79638e-5 kg (7 suppliers, which the file names only by identifier); sum of these -0.02041 kg; lognormal variance with pedigree 0.138, pedigree (3,5,1,5,5)
  properties: carbon content, fossil 0.747344, dry mass 0.847 kg, heating value, net 30.79 MJ, water content 0.180638, wet mass 1 kg
- wastewater, average: -0.00515166, -1.83419e-5 m3 (2 suppliers, which the file names only by identifier); sum of these -0.00517 m3
  properties: carbon content, non-fossil 0.194039, dry mass 0.346837 kg, water content 2882.2, wet mass 1000 kg
- water, deionised: 4.79 kg; lognormal variance with pedigree 0.0027, pedigree (1,2,1,5,1)
  properties: wet mass 1 kg

## Inputs from nature
- Water, unspecified natural origin [natural resource, in water]: 0.04241 m3; lognormal variance with pedigree 0.4106, pedigree (2,5,1,5,1)

## Emissions to nature
- Water [air, unspecified]: 0.00183 m3; lognormal variance with pedigree 0.0506, pedigree (2,5,1,5,1)
- Chloride [water, unspecified]: 0.284495 kg; lognormal variance with pedigree 0.25, pedigree (5,5,5,5,5)
- Sodium I [water, unspecified]: 0.184498 kg; lognormal variance with pedigree 0.25, pedigree (5,5,5,5,5)
- Water [water, surface water]: 0.04028 m3; lognormal variance with pedigree 0.0421, pedigree (1,2,1,5,1)

## Extrapolations
This dataset has been copied from an original dataset covering the geography RER. The uncertainty has been adjusted accordingly.

## Review by Eric Johnson 2022-08-02
Because this dataset is unchanged from that submitted for PEF, which was reviewed and approved only a few months ago, I also approve this one - without a detailed re-review, which I believe to be unneccessary.
