# heat and power co-generation unit construction, organic Rankine cycle, 1400kW thermal, components for electricity only

Dataset: EcoSpold 2, unit process
Geography: CH
Time period: 2000-01-01 to 2022-12-31
Technology level: current
Classification: EcoSpold01Categories: wood energy/cogeneration
Classification: ISIC rev.4 ecoinvent: 4220:Construction of utility projects
Tags: ConvertedDataset
Scenario: Business-as-Usual
System model: Substitution, consequential, long-term
Generated by: Christian Bauer
Published in: Bauer, C. 2007
Database: ecoinvent
isCopyrightProtected: true
accessRestrictedTo: 1

## General comment
This dataset represents the construction of components of a 1400 kWth cogeneration plant. The dataset represents all components necessary only for electricity production.

## Included activities start
From unoccupied land forseen for the construction of a cogeneration plant.

## Included activities end
This activity ends with components of a cogeneration plant necessary for electricity production, having a lifetime of 20 years.

## Geography
Data for a specific Swiss cogeneration plant. Dataset could be used for similarly dimensioned cogeneration plants in other regions.

## Technology
The 1400 kWth cogeneration plant is supplied with wood chips automatically. The electricity production takes place through an Organic Ranking Cycle using a steam turbine and a multi-cyclone filter.

## Reference product
- heat and power co-generation unit, organic Rankine cycle, 1400kW thermal, components for electricity only: 1 unit; By-product classification allocatable product; CPC 461: Electric motors, generators and transformers, and parts thereof
  production volume 0.0336675 unit
  properties: carbon allocation 0 kg, carbon content 0, price 34703.6 EUR2005

## Inputs from technosphere
- control cabinet, heat and power co-generation unit, 160kW electrical: 3 unit; lognormal variance with pedigree 0.148, pedigree (4,5,5,1,1)
- generator, 200kW electrical: 1 unit; lognormal variance with pedigree 0.148, pedigree (4,5,5,1,1)

## Sampling procedure
Data from one specific 5 MW cogeneration plant, installed in Switzerland.

## Extrapolations
The extrapolation factor is 0.8.

## Review by Christian Bauer 2003-08-19
passed

## Review by Roland Hischier 2011-09-23
Transfer of documentation done.
