# geothermal power plant construction

Dataset: EcoSpold 2, unit process
Geography: SV
Time period: 2015-01-01 to 2022-12-31
Technology level: current
Classification: ISIC rev.4 ecoinvent: 4220:Construction of utility projects
Tags: power plant; geothermal energy
Scenario: Business-as-Usual
System model: Substitution, consequential, long-term
Generated by: Florentine Brunner
Published in: S Hirchberg, S Wiemer, P Burgherr 2015
Database: ecoinvent
isCopyrightProtected: true
accessRestrictedTo: 1

## General comment
This dataset was created as copy of the corresponding Swiss activity. It is meant to be used temporarily until a region specific power plant construction dataset is available.
This dataset represents the construction of the geothermal power plant at the surface, resulting in a coupled underground and surface system. It collects all parts necessary to build a geothermal power plant: deep well drilling, stimulation, and surface power generation installations. It further includes the implementation of a downhole pump connected with the power generator.
Detailed information on this dataset is presented in the book "Energy from the Earth. 2015. Hirschberg, Wiemer, Burgherr (eds.) (see field "Data Generator and Publication").

## Included activities start
Includes all "components" of a 5.5MWel deep geothermal power plant.

## Included activities end
Electricity generation facility, deep geothermal power.

## Geography
Represents installation of a deep geothermal power plant in Switzerland. Used as first approximation for this geography. Uncertainties adjusted accordingly.

## Reference product
- geothermal power plant, 5.5MWel: 1 unit; By-product classification allocatable product; CPC 53262: Power plants
  production volume 0.828515 unit
  properties: carbon allocation 0 kg, carbon content 0, price 2.18525e7 EUR2005

## Inputs from technosphere
- deep well, drilled, for geothermal power: 32000 m; lognormal variance with pedigree 0.1, pedigree (2,2,5,5,2)
- heat and power co-generation unit, 1MWel, 6.4MWth: 5.05 unit; lognormal variance with pedigree 0.1, pedigree (2,2,5,2,2)
- inert waste, for final disposal: -223132 kg; lognormal variance with pedigree 0.1, pedigree (2,2,2,5,2)
  properties: dry mass 0.995 kg, water content 0.00502513, wet mass 1 kg
- steel, low-alloyed: 223132 kg; lognormal variance with pedigree 0.1, pedigree (2,2,5,5,2)
  properties: carbon content, fossil 0.005, dry mass 1 kg, wet mass 1 kg
- stimulation, deep well: 40000 m3; lognormal variance with pedigree 0.1, pedigree (2,2,5,5,2)

## Inputs from nature
- Occupation, industrial area [natural resource, land]: 240000 m2*year; lognormal variance with pedigree 0.1, pedigree (2,2,5,5,2)
- Transformation, from unspecified, natural (non-use) [natural resource, land]: 8000 m2; lognormal variance with pedigree 0.1, pedigree (2,2,5,5,2)
- Transformation, to industrial area [natural resource, land]: 8000 m2; lognormal variance with pedigree 0.1, pedigree (2,2,5,5,2)

## Sampling procedure
Literature

## Extrapolations
Extrapolated from CH conditions.
