# sulfur hexafluoride production, liquid

Dataset: EcoSpold 2, unit process
Geography: RoW
Time period: 1998-01-01 to 2022-12-31
Technology level: current
Classification: EcoSpold01Categories: chemicals/inorganics
Classification: ISIC rev.4 ecoinvent: 2011:Manufacture of basic chemicals
Tags: ConvertedDataset
Scenario: Business-as-Usual
System model: Substitution, consequential, long-term
Generated by: Niels Jungbluth
Published in: Althaus H.-J. 2007
Database: ecoinvent
isCopyrightProtected: true
accessRestrictedTo: 1

## General comment
About 80% of the produced amount is used for SF6 insulated electrical installations and switchgear manufacturers. The magnesium industry uses 5% of the total production.
[This dataset was already contained in the ecoinvent database version 2. It was not individually updated during the transfer to ecoinvent version 3. Life Cycle Impact Assessment results may still have changed, as they are affected by changes in the supply chain, i.e. in other datasets. This dataset was generated following the ecoinvent quality guidelines for version 2. It may have been subject to central changes described in the ecoinvent version 3 change report (http://www.ecoinvent.org/database/ecoinvent-version-3/reports-of-changes/), and the results of the central updates were reviewed extensively. The changes added e.g. consistent water flows and other information throughout the database. The documentation of this dataset can be found in the ecoinvent reports of version 2, which are still available via the ecoinvent website. The change report linked above covers all central changes that were made during the conversion process.]

## Included activities end
Production of SF6 from fluorine and sulphur. Infrastructure estimated with generic data. No data for energy use.

## Geography
Estimation for Europe

## Technology
Burning of sulphur in a stream of fluorine

## Time period
Time of publication

## Reference product
- sulfur hexafluoride, liquid: 1 kg; By-product classification allocatable product; CPC 342: Basic inorganic chemicals n.e.c.
  production volume 2.67763 kg
  properties: carbon allocation 0 kg, carbon content 0, carbon content, fossil 0, carbon content, non-fossil 0, dry mass 1 kg, price 3.38734 EUR2005, water content 0, water in wet mass 0 kg, wet mass 1 kg

## Inputs from technosphere
- chemical factory, organics: 4e-10 unit; lognormal variance with pedigree 0.59, pedigree (5,5,5,5,5)
- fluorine, liquid: 0.781 kg; lognormal variance with pedigree 0.0342, pedigree (3,4,5,5,3)
  properties: dry mass 1 kg, wet mass 1 kg
- sulfur: 0.219 kg; lognormal variance with pedigree 0.0262, pedigree (3,4,5,5,1)
  properties: dry mass 1 kg, wet mass 1 kg

## Emissions to nature
- Sulfur hexafluoride [air, unspecified]: 0.005 kg; lognormal variance with pedigree 0.0342, pedigree (3,4,5,5,3)

## Sampling procedure
Literature survey

## Extrapolations
From single data. This dataset has been copied from an original dataset covering the geography RER. The uncertainty has been adjusted accordingly.

## Review by Roland Hischier 2003-05-28
Passed.
