# solder factory construction

Dataset: EcoSpold 2, unit process
Geography: RoW
Time period: 2000-01-01 to 2022-12-31
Technology level: current
Classification: EcoSpold01Categories: metals/refinement
Classification: ISIC rev.4 ecoinvent: 4100:Construction of buildings
Tags: ConvertedDataset
Scenario: Business-as-Usual
System model: Substitution, consequential, long-term
Generated by: Niels Jungbluth
Published in: Althaus H.-J. 2000
Database: ecoinvent
isCopyrightProtected: true
accessRestrictedTo: 1

## General comment
Inventory for a production plant with an annual capacity of 100'000t and a life time of 50a.
[This dataset was already contained in the ecoinvent database version 2. It was not individually updated during the transfer to ecoinvent version 3. Life Cycle Impact Assessment results may still have changed, as they are affected by changes in the supply chain, i.e. in other datasets. This dataset was generated following the ecoinvent quality guidelines for version 2. It may have been subject to central changes described in the ecoinvent version 3 change report (http://www.ecoinvent.org/database/ecoinvent-version-3/reports-of-changes/), and the results of the central updates were reviewed extensively. The changes added e.g. consistent water flows and other information throughout the database. The documentation of this dataset can be found in the ecoinvent reports of version 2, which are still available via the ecoinvent website. The change report linked above covers all central changes that were made during the conversion process.]

## Included activities end
Infrastructure of a solder production plant including land use and buildings, not including equipment.

## Geography
Producer in Germany.

## Technology
Infrastracture building and land use.

## Time period
Time of publications. Most data for 2000.

## Reference product
- solder factory: 1 unit; By-product classification allocatable product; CPC 53269: Other constructions for manufacturing
  production volume 2.67763 unit
  properties: carbon allocation 0 kg, carbon content 0, price 83969.3 EUR2005

## Inputs from technosphere
- building, hall: 600 m2; lognormal variance with pedigree 0.3032, pedigree (2,3,5,5,1)

## Inputs from nature
- Occupation, industrial area [natural resource, land]: 112500 m2*year; lognormal variance with pedigree 0.0432, pedigree (2,3,5,5,1)
- Transformation, from unspecified [natural resource, land]: 2250 m2; lognormal variance with pedigree 0.1232, pedigree (2,3,5,5,1)
- Transformation, to industrial area [natural resource, land]: 2250 m2; lognormal variance with pedigree 0.1232, pedigree (2,3,5,5,1)

## Sampling procedure
Questionnaire

## Extrapolations
From one producer to European average. This dataset has been copied from an original dataset covering the geography RER. The uncertainty has been adjusted accordingly.

## Review by Hans-Jörg Althaus 2003-06-16
passed
