# treatment of sewage sludge, 97% water, WWT, rainwater mineral oil storage, landfarming

Dataset: EcoSpold 2, unit process
Geography: CH
Time period: 2000-01-01 to 2022-12-31
Technology level: current
Classification: ISIC rev.4 ecoinvent: 3821:Treatment and disposal of non-hazardous waste
Scenario: Business-as-Usual
System model: Substitution, consequential, long-term
Generated by: Nikolia Stoikou
Database: ecoinvent
isCopyrightProtected: true
accessRestrictedTo: 1

## General comment
The process represents the treatment of a waste (sewage sludge) that is exclusively produced from another waste treatment. Recommended use of this dataset: to be used within the specific chain of treatments for 'rainwater mineral oil storage'. Share of biogenic carbon in the sludge: 0%.

## Included activities start
The activity starts with the waste being available for landfarming. Collection and transportation of the waste to this process is not included.

## Included activities end
The activity ends with the waste being treated and waste-specific emissions from the landfarming process are released to the environment (air, water and soil). The activity is considering local fate of emissions and the initial specific wastewater composition (generating the sewage sludge). Further, it includes provision of fertiliser functions for N, P, K, if present in the sludge.

## Geography
The site has mean annual temperature (MAT) of 9.5 degC, mean annual precipitation (MAP) of 1483.00559816076 mm/year, mean annual actual evaporation (EAT) of 528.63778611689 mm/year. Climate will influence the local fate emissions based on the elemental composition of the sludge as well as water evaporation to air (= consumptive water use).
References: UN data, 2020. Precipitation, Environment Statistics Database, United Nations Statistics Division Available at: http://data.un.org/Data.aspx?q=precipitation&d=ENV&f=variableID%3a6;
World Bank, 2022. Surface area (sq.km), World Bank Group Available at: https://data.worldbank.org/indicator/AG.SRF.TOTL.K2;
MeteoSwiss, 2022. Data on Swiss temperature mean, Federal Department of Home Affairs FDHA. Federal Office of Meteorology and Climatology. Swiss Climate Available at: https://www.MeteoSwiss.admin.ch/home/climate/swiss-climate-in-detail/Swiss-temperature-mean/Data-on-the-Swiss-temperature-mean.html?query=TEMPERATURE+DATA&topic=/content/MeteoSwiss/tags/topics/klima&pageIndex=0&tab=search_tab;
Doka G.,2021. A model for composition-specific life cycle inventories of regionalised wastewater fates, Zurich, Switzerland. http://www.doka.ch/publications.htm

## Technology
Landfarming is the process of spreading a substrate on agricultural soil. Sewage sludge is generated in the wastewater treatment of rainwater mineral oil storage. Spreading of liquid sewage sludge (97w% water content) on agricultural fields with mobile vacuum tanker.

## Reference product
- sewage sludge, 97% water, WWT, rainwater mineral oil storage: -1 kg; By-product classification Waste; CPC 39920: Sewage sludge
  production volume 6.5111e-5 kg
  properties: aluminium content 0.00504628, barium content 0.000794508, boron content 3.96917e-5, cadmium content 1.50394e-5, calcium content 0.230939, carbon allocation 0.00610653 kg, carbon content 0.203551, carbon content, fossil 0.203551, carbon content, non-fossil 0, chromium content 0.000243723, copper content 0.00044225, dry mass 0.03 kg, heating value, gross 0.229531 MJ, heating value, net 0 MJ, hydrogen content 0.0276891, iron content 0.057057, lead content 7.70715e-5, magnesium content 0.00545761, manganese content 0.0035672, nickel content 8.22364e-5, nitrogen content 0.0139357, oxygen content 0.351492, phosphorus content 0.0178498, potassium content 0.0065668, price 0 EUR2005, sodium content 0.0523505, strontium content 0.00118274, sulfur content 0.0136201, water content 32.3333, water in wet mass 0.97 kg, wet mass 1 kg, zinc content 0.00800132

## Inputs from technosphere
- liquid manure spreading, by vacuum tanker: 0.00097087 m3
- organic nitrogen fertiliser, as N: -0.00041807 kg; lognormal variance with pedigree 0.2173, pedigree (1,1,1,1,1)
  properties: dry mass 1 kg, nitrogen content 1, price 0.473 EUR2005, wet mass 1 kg
- organic phosphorus fertiliser, as P2O5: -0.0012271 kg; lognormal variance with pedigree 0.1085, pedigree (1,1,1,1,1)
  properties: dry mass 1 kg, oxygen content 0.563579, phosphorus content 0.436421, price 0.241 EUR2005, wet mass 1 kg
- organic potassium fertiliser, as K2O: -0.00023731 kg; lognormal variance with pedigree 0.0427, pedigree (1,1,1,1,1)
  properties: dry mass 1 kg, oxygen content 0.169852, potassium content 0.830148, price 0.188 EUR2005, wet mass 1 kg

## Emissions to nature
- Ammonia [air, non-urban air or from high stacks]: 1.7121e-5 kg; lognormal variance with pedigree 0.2296, pedigree (1,1,2,1,1)
- Carbon dioxide, fossil [air, non-urban air or from high stacks]: 0.0223906 kg; lognormal variance with pedigree 0.0006, pedigree (1,1,2,1,1)
- Dinitrogen monoxide [air, non-urban air or from high stacks]: 7.5335e-6 kg; lognormal variance with pedigree 0.2379, pedigree (1,1,2,1,1)
- Nitrogen oxides [air, non-urban air or from high stacks]: 3.3079e-6 kg; lognormal variance with pedigree 0.2532, pedigree (1,1,2,1,1)
- Water [air, non-urban air or from high stacks]: 0.00034577 m3; lognormal variance with pedigree 0.0012, pedigree (1,1,2,1,1)
- Non-hazardous waste disposed [inventory indicator, waste]: 1 kg
- Aluminium III [soil, agricultural]: 0.00015139 kg; lognormal variance with pedigree 0.1193, pedigree (1,1,2,1,1)
- Barium II [soil, agricultural]: 2.3835e-5 kg; lognormal variance with pedigree 0.2623, pedigree (1,1,2,1,1)
- Boron [soil, agricultural]: 1.1908e-6 kg; lognormal variance with pedigree 0.3077, pedigree (1,1,2,1,1)
- Cadmium II [soil, agricultural]: 4.5118e-7 kg; lognormal variance with pedigree 0.6983, pedigree (1,1,2,1,1)
- Calcium [soil, agricultural]: 0.0069282 kg; lognormal variance with pedigree 0.0099, pedigree (1,1,2,1,1)
- Carbon [soil, agricultural]: 0.0061065 kg; lognormal variance with pedigree 0.0914, pedigree (1,1,2,1,1)
- Chromium III [soil, agricultural]: 7.3117e-6 kg; lognormal variance with pedigree 0.3817, pedigree (1,1,2,1,1)
- Copper ion [soil, agricultural]: 1.3268e-5 kg; lognormal variance with pedigree 0.3206, pedigree (1,1,2,1,1)
- Heat, waste [soil, agricultural]: 0.21768 MJ; lognormal variance with pedigree 0.103, pedigree (1,1,2,1,1)
- Iron ion [soil, agricultural]: 0.0017117 kg; lognormal variance with pedigree 0.1033, pedigree (1,1,2,1,1)
- Lead II [soil, agricultural]: 2.3121e-6 kg; lognormal variance with pedigree 0.5092, pedigree (1,1,2,1,1)
- Magnesium [soil, agricultural]: 0.00016373 kg; lognormal variance with pedigree 0.0567, pedigree (1,1,2,1,1)
- Manganese II [soil, agricultural]: 0.00010702 kg; lognormal variance with pedigree 0.1788, pedigree (1,1,2,1,1)
- Nickel II [soil, agricultural]: 2.4671e-6 kg; lognormal variance with pedigree 0.4138, pedigree (1,1,2,1,1)
- Potassium I [soil, agricultural]: 0.000197 kg; lognormal variance with pedigree 0.0427, pedigree (1,1,2,1,1)
- Sodium [soil, agricultural]: 0.0015705 kg
- Strontium [soil, agricultural]: 3.5482e-5 kg; lognormal variance with pedigree 0.1422, pedigree (1,1,2,1,1)
- Sulfur [soil, agricultural]: 0.0004086 kg; lognormal variance with pedigree 0.0266, pedigree (1,1,2,1,1)
- Zinc II [soil, agricultural]: 0.00024004 kg; lognormal variance with pedigree 0.1337, pedigree (1,1,2,1,1)
- Nitrate [water, surface water]: 0.00027889 kg; lognormal variance with pedigree 0.2213, pedigree (1,1,2,1,1)
- Phosphate [water, ground-]: 9.5796e-6 kg; lognormal variance with pedigree 0.1353, pedigree (1,1,2,1,1)
- Phosphate [water, surface water]: 0.00016902 kg; lognormal variance with pedigree 0.1143, pedigree (1,1,2,1,1)
- Water [water, ground-]: 0.00062423 m3; lognormal variance with pedigree 0.0012, pedigree (1,1,2,1,1)
