# aluminium alloy production, AlMg3

Dataset: EcoSpold 2, unit process
Geography: RoW
Time period: 1998-01-01 to 2022-12-31
Technology level: current
Classification: EcoSpold01Categories: metals/extraction
Classification: ISIC rev.4 ecoinvent: 2420:Manufacture of basic precious and other non-ferrous metals
Synonyms: AA 5754; EN AW-5754
Tags: ConvertedDataset
Scenario: Business-as-Usual
System model: Substitution, consequential, long-term
Generated by: Niels Jungbluth
Published in: Althaus H.-J. 2000
Database: ecoinvent
isCopyrightProtected: true
accessRestrictedTo: 1

## General comment
The production of AlMg3 is investigated with the content of different metals used for the alloy. This aluminium alloy contains 3% of magnesium.
[This dataset was already contained in the ecoinvent database version 2. It was not individually updated during the transfer to ecoinvent version 3. Life Cycle Impact Assessment results may still have changed, as they are affected by changes in the supply chain, i.e. in other datasets. This dataset was generated following the ecoinvent quality guidelines for version 2. It may have been subject to central changes described in the ecoinvent version 3 change report (http://www.ecoinvent.org/database/ecoinvent-version-3/reports-of-changes/), and the results of the central updates were reviewed extensively. The changes added e.g. consistent water flows and other information throughout the database. The documentation of this dataset can be found in the ecoinvent reports of version 2, which are still available via the ecoinvent website. The change report linked above covers all central changes that were made during the conversion process.]

## Included activities end
Production of alloy from primary metals, no extra infrastructure.

## Geography
Data for 1 producer

## Technology
Production of aluminium-magnesium alloy from primary metals, no recycling of input materials.

## Time period
Environmental report

## Reference product
- aluminium alloy, AlMg3: 1 kg; By-product classification allocatable product; CPC 41431: Unwrought aluminium
  production volume 2.67763 kg
  properties: carbon allocation 0 kg, carbon content 0, carbon content, fossil 0, carbon content, non-fossil 0, dry mass 1 kg, price 1.66 EUR2005, water content 0, water in wet mass 0 kg, wet mass 1 kg

## Inputs from technosphere
- aluminium, cast alloy: 0.965 kg; lognormal variance with pedigree 0.0127, pedigree (2,2,5,5,1)
  properties: dry mass 1 kg, wet mass 1 kg
- cast iron: 0.00406 kg; lognormal variance with pedigree 0.0127, pedigree (2,2,5,5,1)
  properties: carbon content, fossil 0.04, dry mass 1 kg, wet mass 1 kg
- chromium: 0.00305 kg; lognormal variance with pedigree 0.0127, pedigree (2,2,5,5,1)
  properties: dry mass 1 kg, wet mass 1 kg
- copper, cathode: 0.00102 kg; lognormal variance with pedigree 0.0127, pedigree (2,2,5,5,1)
  properties: dry mass 1 kg, wet mass 1 kg
- electricity, medium voltage: 0.151524, 0.0056693, 0.0720304, 1.25018, 0.104974, 0.00562655 kWh (6 suppliers, which the file names only by identifier); sum of these 1.59 kWh; lognormal variance with pedigree 0.0201, pedigree (4,2,5,5,1)
- magnesium: 0.0305 kg; lognormal variance with pedigree 0.0127, pedigree (2,2,5,5,1)
  properties: dry mass 1 kg, wet mass 1 kg
- manganese: 0.00508 kg; lognormal variance with pedigree 0.0127, pedigree (2,2,5,5,1)
  properties: dry mass 1 kg, wet mass 1 kg
- silicon, metallurgical grade: 0.00406 kg; lognormal variance with pedigree 0.0127, pedigree (2,2,5,5,1)
  properties: dry mass 1 kg, wet mass 1 kg
- zinc: 0.00203 kg; lognormal variance with pedigree 0.0127, pedigree (2,2,5,5,1)
  properties: dry mass 1 kg, wet mass 1 kg

## Sampling procedure
Environmental data for an important producer

## Extrapolations
From 1 producer to average Europe This dataset has been copied from an original dataset covering the geography RER. The uncertainty has been adjusted accordingly.

## Review by Mischa Classen 2003-06-13
passed
