# tube insulation factory construction

Dataset: EcoSpold 2, unit process
Geography: RoW
Time period: 1997-01-01 to 2022-12-31
Technology level: current
Classification: ISIC rev.4 ecoinvent: 4100:Construction of buildings
Classification: EcoSpold01Categories: insulation materials/production
Tags: ConvertedDataset
Scenario: Business-as-Usual
System model: Substitution, consequential, long-term
Share of production covered: 95 %
Generated by: Niels Jungbluth
Published in: Kellenberger D. 2007
Database: ecoinvent
isCopyrightProtected: true
accessRestrictedTo: 1

## General comment
Infrastructure for factory including landuse not including machinery. Annual production 5000 tonnes tube insulation material. Transformation based on general assumption with a lifetime of 50a.
[This dataset was already contained in the ecoinvent database version 2. It was not individually updated during the transfer to ecoinvent version 3. Life Cycle Impact Assessment results may still have changed, as they are affected by changes in the supply chain, i.e. in other datasets. This dataset was generated following the ecoinvent quality guidelines for version 2. It may have been subject to central changes described in the ecoinvent version 3 change report (http://www.ecoinvent.org/database/ecoinvent-version-3/reports-of-changes/), and the results of the central updates were reviewed extensively. The changes added e.g. consistent water flows and other information throughout the database. The documentation of this dataset can be found in the ecoinvent reports of version 2, which are still available via the ecoinvent website. The change report linked above covers all central changes that were made during the conversion process.]

## Included activities end
Infrastructure for two producers with production places in Münster and Zeulenroda, Germany and in Thailand.

## Geography
Data for production plants in Germany and Thailand

## Technology
Production plant for elastomere tube insulations.

## Time period
Year of environmental reporting. Two different production places.

## Reference product
- tube insulation factory: 1 unit; By-product classification allocatable product; CPC 53269: Other constructions for manufacturing
  production volume 3.75794 unit
  properties: carbon allocation 0 kg, carbon content 0, price 3.34478e6 EUR2005

## Inputs from technosphere
- building, hall: 23900 m2; lognormal variance with pedigree 0.3046, pedigree (3,3,5,5,1)

## Inputs from nature
- Occupation, industrial area [natural resource, land]: 75800 m2*year; lognormal variance with pedigree 0.0446, pedigree (3,3,5,5,1)
- Transformation, from annual crop [natural resource, land]: 1510 m2; lognormal variance with pedigree 0.1246, pedigree (3,3,5,5,1)
- Transformation, to industrial area [natural resource, land]: 1510 m2; lognormal variance with pedigree 0.1246, pedigree (3,3,5,5,1)

## Sampling procedure
Environmental report and questionnaire.

## Extrapolations
none This dataset has been copied from an original dataset covering the geography DE. The uncertainty has been adjusted accordingly.

## Review by Daniel Kellenberger (obsolete) 2003-06-13
passed
