# treatment of used bus

Dataset: EcoSpold 2, unit process
Geography: CH
Time period: 1990-01-01 to 2022-12-31
Technology level: current
Classification: EcoSpold01Categories: transport systems/road
Classification: ISIC rev.4 ecoinvent: 3830:Materials recovery
Tags: Treatment; ConvertedDataset
Scenario: Business-as-Usual
System model: Substitution, consequential, long-term
Generated by: Michael Spielmann (obsolete)
Published in: Spielmann M. 2004
Database: ecoinvent
isCopyrightProtected: true
accessRestrictedTo: 1

## General comment
The dataset represents the treatment and disposal of one used bus.
[This dataset was already contained in the ecoinvent database version 2. It was not individually updated during the transfer to ecoinvent version 3. Life Cycle Impact Assessment results may still have changed, as they are affected by changes in the supply chain, i.e. in other datasets. This dataset was generated following the ecoinvent quality guidelines for version 2. It may have been subject to central changes described in the ecoinvent version 3 change report (http://www.ecoinvent.org/database/ecoinvent-version-3/reports-of-changes/), and the results of the central updates were reviewed extensively. The changes added e.g. consistent water flows and other information throughout the database. The documentation of this dataset can be found in the ecoinvent reports of version 2, which are still available via the ecoinvent website. The change report linked above covers all central changes that were made during the conversion process.]

## Included activities start
The activity starts with the disposal of the used bus.

## Included activities end
The dataset ends with the disposal of plastics, glass, emulsion and until and including the disposal of used mineral oil. The dataset does not include the disposal of the bulk material (steel, aluminium and copper) because they are fully recycled and a cut off allocation was made. 50% of all used tyres ar used as secondary fuel in Swiss cement works, consequently was made a cut off allocation and merely taken into account an average transport performance.

## Geography
Data represent Swiss conditions

## Technology
no technologies are specified

## Time period
For the disposal of vehicle we merely have taken into account the bulk material used in the vehicle and make a number of assumptions as follows:
- Steel, aluminium and copper are fully recycled and thus we make a cut off allocation
- 50% of all used tyres are used as a secondary fuel in Swiss cement works. Consequently we make a cut of allocation and merely take into account an average transport performance. It should be beared in mind that about 30% of used tyres are ex-ported BUWAL (2000).
- for the remaining materials a complete disposal is assumed.
References:
BUWAL (2000) Informationen zur Entsorgung von Altreifen. pdf file from http://www.umwelt-schweiz.ch/buwal/de/fachgebiete/fg_abfall/abfallwegweiser/altpneu/index.html.

## Reference product
- used bus: -1 unit; By-product classification Waste; CPC 39990: Other wastes n.e.c.
  production volume 0.0336675 unit
  properties: carbon allocation 1043.76 kg, carbon content 0.0948874, carbon content, fossil 0.094343, carbon content, non-fossil 0.000544443, dry mass 11000 kg, price 0 EUR2005, water content 0, water in wet mass 0 kg, wet mass 11000 kg

## Inputs from technosphere
- waste emulsion paint: -12 kg; lognormal variance with pedigree 0.0041, pedigree (3,4,1,3,1)
  properties: carbon content, fossil 0.27, dry mass 1 kg, heating value, net 8.18 MJ, wet mass 1 kg
- waste glass: -115 kg; lognormal variance with pedigree 0.0041, pedigree (3,4,1,3,1)
  properties: dry mass 1 kg, heating value, net 0.05 MJ, wet mass 1 kg
- waste mineral oil: -25.2 kg; lognormal variance with pedigree 0.0041, pedigree (3,4,1,3,1)
  properties: carbon content, fossil 0.864444, dry mass 0.9 kg, heating value, net 34.7 MJ, water content 0.111111, wet mass 1 kg
- waste plastic, mixture: -553 kg; lognormal variance with pedigree 0.0041, pedigree (3,4,1,3,1)
  properties: carbon content, fossil 0.747344, dry mass 0.847 kg, heating value, net 30.79 MJ, water content 0.180638, wet mass 1 kg

## Sampling procedure
Data is based on the material consumption of vehicles. For the transportation of used tyres an expert estimate is used.

## Review by Emilia Moreno Ruiz 2012-02-29
trainee DS, OK, Liliane Kelmann
