# harvesting, by complete harvester, ground crops

Dataset: EcoSpold 2, unit process
Geography: CA-QC
Time period: 1991-01-01 to 2022-12-31
Technology level: current
Classification: EcoSpold01Categories: agricultural means of production/work processes
Classification: ISIC rev.4 ecoinvent: 0161:Support activities for crop production
Scenario: Business-as-Usual
System model: Substitution, consequential, long-term
Generated by: Dominique Maxime
Published in: Nemecek, T. 2007
Database: ecoinvent
isCopyrightProtected: true
accessRestrictedTo: 1

## General comment
This dataset represents the service of complete harvesting of one hectare of planted potato.
Child dataset exchanges scaled from GLO parent dataset based on diesel consumption in Quebec. Created to proxy farm machinery/fieldwork representative of the Quebec context. Data quality indicators adjusted accordingly. Other difference with the parent dataset is the production volume, which now represents the production volume in Quebec.
Diesel consumption is calculated from primary data and models from the American Society of Agricultural and Biological Engineers (ASABE) published in 2006 and might be representative of more recent technology than the GLO parent dataset.
Warning: If the parent value for diesel consumption (in the GLO parent dataset) is changed in future edition, the user must change the parameter "ecoinvent diesel consumption" accordingly in order to get the right ratio of qc/ecoinvent diesel consumption.

## Included activities start
The complete harvesting process starts with preliminary work at the farm, like attaching the adequate machine to the tractor.

## Included activities end
This activity ends with transfer back to farm and concluding work, like uncoupling the machine. The inventory includes the transfer to field; field work (for a parcel of land of 1 ha surface); diesel fuel consumption and the amount of agricultural machinery and of the shed, which has to be attributed to the harvesting. Also taken into consideration is the amount of emissions to the air from combustion and the emission to the soil from tyre abrasion during the work process. The overlapping during the field work is considered. Not included are dust other than from combustion and noise. The potato production is not included.

## Geography
Child dataset air emissions related to diesel combustion are scaled from parent dataset (GLO) based on the ratio of diesel consumption in Quebec over diesel consumption of GLO. Created to proxy farm machinery/fieldwork representative of the Quebec context. Data quality indicators adjusted accordingly.

## Technology
Fuel consumption has been extrapolated to Quebec, but emissions per kg diesel were taken from the original values.

## Time period
The emissions per kg of combusted Diesel were taken from the original values but the Diesel consumption has been updated.

## Parameters
- farm machinery diesel consumption ratio: 0.805338 dimensionless; name machine_diesel_ratio; = qc_diesel/ EI_diesel
  Ratio of diesel consumption for tractor and its machinery: kg diesel per ha of the Quebec machinery/kg diesel per ha of the ecoinvent"s parent machinery
- parent dataset diesel consumption: 28.1 kg/unit; name EI_diesel; lognormal variance with pedigree 0.004, pedigree (1,4,1,5,1)
  Diesel consumption in the parent agricultural fieldwork dataset in kg/ha diesel
- potato harvested area quebec: 16950 ha; name potatoe_area_qc; lognormal variance with pedigree 0.00073, pedigree (2,2,1,1,1)
  2008-2011 yearly average of potato harvested area in Quebec. Source: Quebec Ministry of Agriculture, Fisheries, and Food [MAPAQ], 2013. http://www.mapaq.gouv.qc.ca/SiteCollectionDocuments/Statistiques/secteurpommedeterre.pdf
- potato harvested area world: 1.86701e7 ha; name potatoe_area_world; lognormal variance with pedigree 7e-5, pedigree (1,1,1,1,1)
  2008-2011 yearly average of potato harvested area in the world. Source: FAOSTAT, 2013 (http://faostat3.fao.org/faostat-gateway/go/to/download/Q/QC/E)
- qc child dataset diesel consumption: 22.63 kg/unit; name qc_diesel; lognormal variance with pedigree 0.00073, pedigree (1,2,1,2,1)
  Diesel consumption in the Québec agricultural fieldwork dataset in kg/ha diesel

## Reference product
- harvesting, by complete harvester, ground crops: 1 ha; By-product classification allocatable product; CPC 86119: Other support services to crop production
  production volume 17413.5 ha
  properties: carbon allocation 0 kg, carbon content 0, price 77.1727 EUR2005

## Inputs from technosphere
- agricultural machinery, unspecified: 26.6 kg; lognormal variance with pedigree 0.004, pedigree (1,4,5,5,1)
- diesel: 22.63 kg; lognormal variance with pedigree 0.004, pedigree (1,4,5,5,1)
  properties: carbon content, fossil 0.865, dry mass 1 kg, heating value, net 42.8 MJ, wet mass 1 kg
- shed: 0.0556 m2; lognormal variance with pedigree 0.304, pedigree (1,4,5,5,1)
- tractor, 4-wheel, agricultural: 6.14 kg; lognormal variance with pedigree 0.004, pedigree (1,4,5,5,1)

## Emissions to nature
- Ammonia [air, non-urban air or from high stacks]: 0.000453405 kg; lognormal variance with pedigree 0.0601, pedigree (1,2,5,5,3)
- Benzene [air, non-urban air or from high stacks]: 0.000165094 kg; lognormal variance with pedigree 0.0601, pedigree (1,2,5,5,3)
- Benzo(a)pyrene [air, non-urban air or from high stacks]: 6.79705e-7 kg; lognormal variance with pedigree 0.6601, pedigree (1,2,5,5,3)
- Cadmium II [air, non-urban air or from high stacks]: 2.263e-7 kg; lognormal variance with pedigree 0.6601, pedigree (1,2,5,5,3)
- Carbon dioxide, fossil [air, non-urban air or from high stacks]: 70.3865 kg; lognormal variance with pedigree 0.0201, pedigree (1,2,5,5,3)
- Carbon monoxide, fossil [air, non-urban air or from high stacks]: 0.259319 kg; lognormal variance with pedigree 0.654, pedigree (1,4,5,5,1)
- Chromium III [air, non-urban air or from high stacks]: 1.13553e-6 kg; lognormal variance with pedigree 0.6601, pedigree (1,2,5,5,3)
- Copper ion [air, non-urban air or from high stacks]: 3.84952e-5 kg; lognormal variance with pedigree 0.6601, pedigree (1,2,5,5,3)
- Dinitrogen monoxide [air, non-urban air or from high stacks]: 0.00272204 kg; lognormal variance with pedigree 0.0601, pedigree (1,2,5,5,3)
- Methane, fossil [air, non-urban air or from high stacks]: 0.00292338 kg; lognormal variance with pedigree 0.0601, pedigree (1,2,5,5,3)
- NMVOC, non-methane volatile organic compounds [air, non-urban air or from high stacks]: 0.136907 kg; lognormal variance with pedigree 0.044, pedigree (1,4,5,5,1)
- Nickel II [air, non-urban air or from high stacks]: 1.58652e-6 kg; lognormal variance with pedigree 0.6601, pedigree (1,2,5,5,3)
- Nitrogen oxides [air, non-urban air or from high stacks]: 1.30465 kg; lognormal variance with pedigree 0.044, pedigree (1,4,5,5,1)
- PAH, polycyclic aromatic hydrocarbons [air, non-urban air or from high stacks]: 7.45743e-5 kg; lognormal variance with pedigree 0.3201, pedigree (1,2,5,5,3)
- Particulate Matter, < 2.5 um [air, non-urban air or from high stacks]: 0.0456627 kg; lognormal variance with pedigree 0.3201, pedigree (1,2,5,5,3)
- Selenium IV [air, non-urban air or from high stacks]: 2.263e-7 kg; lognormal variance with pedigree 0.0601, pedigree (1,2,5,5,3)
- Sulfur dioxide [air, non-urban air or from high stacks]: 0.0228716 kg; lognormal variance with pedigree 0.0201, pedigree (1,2,5,5,3)
- Zinc II [air, non-urban air or from high stacks]: 2.263e-5 kg; lognormal variance with pedigree 0.6601, pedigree (1,2,5,5,3)
- Cadmium II [soil, agricultural]: 4.01e-6 kg; lognormal variance with pedigree 0.044, pedigree (1,4,5,5,1)
- Lead II [soil, agricultural]: 1.82e-5 kg; lognormal variance with pedigree 0.044, pedigree (1,4,5,5,1)
- Zinc II [soil, agricultural]: 0.0104 kg; lognormal variance with pedigree 0.044, pedigree (1,4,5,5,1)

## Sampling procedure
The inventoried HC, NOx, CO and fuel consumption values are measurements made following two test cycles (ISO 8178 C1 test and a specific 6-level-test created by the FAT) and on measurements made during the field work. The other emissions were calculated basing on literature data and the measured fuel consumption.

## Extrapolations
Values given in the reference are representative for the chosen work processes. Dataset based on GLO parent dataset which was extrapolated from CH geography context without modification of exchanges. Processes are typical procedures for Switzerland around the year 2000, they are not statistical average processes. This dataset has been adapted only for diesel input representative of the Quebec context and for combustion emissions scaled from the difference in diesel consumption. The uncertainty has been adjusted accordingly.

## Review by Thomas Nemecek 2013-12-27
The production volume needs to be updated, since the GLO production volume has changed meanwhile.
