# adipic acid production

Dataset: EcoSpold 2, unit process
Geography: RoW
Time period: 1997-01-01 to 2022-12-31
Technology level: current
Classification: ISIC rev.4 ecoinvent: 2011:Manufacture of basic chemicals
Synonyms: Acifloctin; Adilactetten; Acinetten; 124-04-9; Hexanedioic acid
Scenario: Business-as-Usual
System model: Substitution, consequential, long-term
Generated by: Hans-Jörg Althaus
Published in: Althaus H.-J. 2007
Database: ecoinvent
isCopyrightProtected: true
accessRestrictedTo: 1

## General comment
This dataset represents the production of 1 kg of adipic acid. Adipic acid is isolated as colourless, odourless crystals having an acidic taste. It is very soluble in methanol and ethanol, soluble in water and acetone, and very slightly soluble in cyclohexane and benzene. Adipic acid crystallises as monoclinic prisms from water, ethyl acetate, or acetone - petroleum ether. Solubility in water increases rapidly with temperature.
Adipic acid is the most commercially significant aliphatic dicarboxylic acid. Appearing in nature in only minor amounts, it is synthesised on a very large scale world-wide. Adipic acid is an organic compound used for the production of nylon 66 polyamide, which is widely used for the production of synthetic textiles and plastics.
This dataset is based on estimations using industrial data. It models the production of adipic acid by the nitric acid oxidation of a mixture of cyclohexanone – cyclohexanol (KA mixture) which is produced by the oxidation of cyclohexane. More than 80% of the total production is through this process. Only the most important flows are taken into account. The energy and water demands are approximated based on data from a large chemical factory (Gendorf 2016).
Succinic and glutaric acid are produced as by-products (5.7%).
References:
Althaus H.-J., Chudacoff M., Hischier R., Jungbluth N., Osses M. and Primas A. (2007) Life Cycle Inventories of Chemicals. ecoinvent report No. 8, v2.0. EMPA Dübendorf, Swiss Centre for Life Cycle Inventories, Dübendorf, CH.
Gendorf (2016) Umwelterklärung 2015, Werk Gendorf Industriepark, www.gendorf.de.

## Included activities start
The activity starts when the raw materials enter the process.

## Included activities end
This activity ends with the production of adipic acid, including refining (to 99%).

## Geography
The data used has no specific geographical origin as it is based on stoechiometric calculations and estimations. It is assumed to be representative of the production processes in this geography. Some values are based on data from a large chemical factory located in Germany. These are assumed to be valid for this geography.

## Technology
This dataset models the production of adipic acid by nitric acid oxidation of a mixture of cyclohexanol and cyclohexanone, which is obtained by oxidation of cyclohexane. Abatement of N2O emissions is assumed to reduce the emissions by 95% through regenerative thermal oxidation.
Essentially all production of adipic acid is derived from the nitric acid oxidation of a mixture of cyclohexanone – cyclohexanol (KA mixture). The reactor, controlled at 60 – 80 °C and 0.1 – 0.4 MPa, is charged with the recycled nitric acid stream, the KA feed material, and makeup acid containing 50 – 60 % nitric acid and copper – vanadium catalyst. The reaction is very exothermic (6.280 MJ/kg). Adipic acid is obtained with a yield greater than 90%. Nitrogen oxides, carbon dioxide, and some lower dicarboxylic acids are the major by-products, as well as oxidation products arising from impurities in the KA intermediate. Succinic and glutaric acid are accounted for as by-products in this dataset (5.7%).
The nitric acid oxidation step produces three major waste streams: an off-gas containing oxides of nitrogen and CO2, water containing traces of nitric acid and organics from the water removal column; and a dibasic acid purge stream containing adipic, glutaric and succinic acids. The production of adipic acid can be represented by the following simplified reaction formula:
0.733 C6H12O + 0.367 C6H10O + 2 HNO3 -> C6H10O4 + N2O + 2 H2O + 7.23 H2
References:
Althaus H.-J., Chudacoff M., Hischier R., Jungbluth N., Osses M. and Primas A. (2007) Life Cycle Inventories of Chemicals. ecoinvent report No. 8, v2.0. EMPA Dübendorf, Swiss Centre for Life Cycle Inventories, Dübendorf, CH.

## Time period
The data in this dataset come from different years, but overall form the most realistic picture of the production. Some values are based on data published by the Gendorf factory that were collected between 2011 and 2015. The time period has been adjusted accordingly. For more details, see the comments of the exchanges.

## Reference product
- adipic acid: 1 kg; By-product classification allocatable product; CPC 34140: Carboxylic acids and their anhydrides, halides, peroxides and peroxyacids and their halogenated, sulphonated, […]
  production volume 3.2214e9 kg
  properties: carbon allocation 0.493151 kg, carbon content 0.493151, carbon content, fossil 0.493151, carbon content, non-fossil 0, dry mass 1 kg, heating value, net 23.23 MJ, price 1.08 EUR2005, water content 0, water in wet mass 0 kg, wet mass 1 kg

## Inputs from technosphere
- N2O retained, by regenerative thermal oxidation: 0.28595 kg; lognormal variance with pedigree 0.0173, pedigree (2,5,2,3,3)
- chemical factory, organics: 4e-10 unit; lognormal variance with pedigree 0.3098, pedigree (2,3,2,4,3)
- cyclohexane: 0.73 kg; lognormal variance with pedigree 0.1786, pedigree (4,5,5,5,5)
  properties: carbon content, fossil 0.857143, dry mass 1 kg, heating value, net 43.22 MJ, wet mass 1 kg
- electricity, medium voltage: 0.0123888, 0.000463528, 0.00588928, 0.102216, 0.0085828, 0.000460033 kWh (6 suppliers, which the file names only by identifier); sum of these 0.13 kWh; lognormal variance with pedigree 0.1786, pedigree (4,5,5,5,5)
- heat, district or industrial, natural gas: 3.13398, 20.654 MJ (2 suppliers, which the file names only by identifier); sum of these 23.788 MJ; lognormal variance with pedigree 0.0382, pedigree (4,5,3,5,1)
  properties: heating value, net 1 MJ
- heat, district or industrial, other than natural gas: 0.0231444, 13.2543 MJ (2 suppliers, which the file names only by identifier); sum of these 13.2775 MJ; lognormal variance with pedigree 0.0382, pedigree (4,5,3,5,1)
  properties: heating value, net 1 MJ
- nitric acid, without water, in 50% solution state: 0.0693542, 0.042085, 0.0113896, 0.0168606, 0.0201649, 0.0169232, 0.0547302, 0.128492 kg (8 suppliers, which the file names only by identifier); sum of these 0.36 kg; lognormal variance with pedigree 0.0561, pedigree (4,2,5,5,3)
  properties: dry mass 1 kg, wet mass 1 kg
- oxygen, liquid: 0.103948 kg; lognormal variance with pedigree 0.0118, pedigree (2,4,2,4,3)
  properties: dry mass 1 kg, wet mass 1 kg
- sodium hydroxide, without water, in 50% solution state: 0.05 kg; lognormal variance with pedigree 0.1786, pedigree (4,5,5,5,5)
  properties: dry mass 1 kg, heating value, net 3.03 MJ, wet mass 1 kg
- succinic acid: -0.0570825 kg; lognormal variance with pedigree 0.0113, pedigree (2,4,1,3,3)
  properties: heating value, net 18.48 MJ, price 1.57 EUR2005
- sulfuric acid: 0.08 kg; lognormal variance with pedigree 0.1786, pedigree (4,5,5,5,5)
  properties: dry mass 1 kg, wet mass 1 kg
- tap water: 0.00118255, 0.000415735, 0.00318571, 0.000633753, 0.00459085, 1.0659e-5, 0.0159807 kg (7 suppliers, which the file names only by identifier); sum of these 0.026 kg; lognormal variance with pedigree 0.0104, pedigree (2,3,2,4,3)
  properties: carbon content, fossil 0.00178991, dry mass 0.000337476 kg, water content 2962.17, wet mass 1 kg
- wastewater, average: -2.69042e-6, -9.57892e-9 m3 (2 suppliers, which the file names only by identifier); sum of these -2.7e-6 m3; lognormal variance with pedigree 0.0104, pedigree (2,3,1,4,3)
  properties: carbon content, non-fossil 0.194039, dry mass 0.346837 kg, water content 2882.2, wet mass 1000 kg

## Inputs from nature
- Water, cooling, unspecified natural origin [natural resource, in water]: 0.0164 m3; lognormal variance with pedigree 0.0104, pedigree (2,3,2,4,3)
- Water, river [natural resource, in water]: 0.00086 m3; lognormal variance with pedigree 0.0104, pedigree (2,3,2,4,3)
- Water, well, in ground [natural resource, in water]: 0.00083 m3; lognormal variance with pedigree 0.0104, pedigree (2,3,2,4,3)

## Emissions to nature
- Dinitrogen monoxide [air, unspecified]: 0.01505 kg; lognormal variance with pedigree 0.0961, pedigree (4,2,5,5,3)
- Nitrogen [air, unspecified]: 0.182044 kg; lognormal variance with pedigree 0.0512, pedigree (2,4,2,4,3)
- Oxygen [air, unspecified]: 0.207896 kg; lognormal variance with pedigree 0.0512, pedigree (2,4,2,4,3)
- Water [air, unspecified]: 0.0014 m3; lognormal variance with pedigree 0.0104, pedigree (2,3,2,4,3)
- Water [water, unspecified]: 0.0167 m3; lognormal variance with pedigree 0.0104, pedigree (2,3,2,4,3)

## Sampling procedure
Data based on literature and stoichiometric calculations. Some values are calculated based on data from a large chemical factory located in Germany. For more details, see the comments of the exchanges.

## Extrapolations
This dataset has been copied from an original dataset covering the geography RER. The uncertainty has been adjusted accordingly.

## Review by Gregor Wernet 2017-08-04
This dataset was additionally reviewed in a separate review process by Eric Johnson of Atlantic Consulting as well as Emilia Moreno Ruiz and Gregor Wernet of ecoinvent.
