# glazing production, double, U<1.1 W/m2K, laminated safety glass

Dataset: EcoSpold 2, unit process
Geography: RoW
Time period: 1996-01-01 to 2022-12-31
Technology level: current
Classification: EcoSpold01Categories: building components/windows
Classification: ISIC rev.4 ecoinvent: 2310:Manufacture of glass and glass products
Tags: ConvertedDataset
Scenario: Business-as-Usual
System model: Substitution, consequential, long-term
Generated by: Martin Lehmann
Published in: Kellenberger D. 2007
Database: ecoinvent
isCopyrightProtected: true
accessRestrictedTo: 1

## General comment
This dataset describes the processes included in the production of 1.06m2 (corresponding to 1m2 visible area) double glazing (2-IV, LSG) with a U-value below 1.1 W/m2K. It can be applied for laminated safety double glazing used in the building sector. 1 m2 visible glazing area has a final weight of 26 kg.
[This dataset was already contained in the ecoinvent database version 2. It was not individually updated during the transfer to ecoinvent version 3. Life Cycle Impact Assessment results may still have changed, as they are affected by changes in the supply chain, i.e. in other datasets. This dataset was generated following the ecoinvent quality guidelines for version 2. It may have been subject to central changes described in the ecoinvent version 3 change report (http://www.ecoinvent.org/database/ecoinvent-version-3/reports-of-changes/), and the results of the central updates were reviewed extensively. The changes added e.g. consistent water flows and other information throughout the database. The documentation of this dataset can be found in the ecoinvent reports of version 2, which are still available via the ecoinvent website. The change report linked above covers all central changes that were made during the conversion process.]

## Included activities end
Included in this dataset are the materials and production processes of 1.06m2 (corresponding to 1m2 visible area) LSG double glazing (2-IV, LSG) with a U-value below 1.1 W/m2K including disposal of waste water and production wastes.

## Geography
Data estimated according to a European company.

## Technology
The technology represents average European production.

## Reference product
- glazing, double, U<1.1 W/m2K, laminated safety glass: 1 m2; By-product classification allocatable product; CPC 37114: Glass in sheets, bent, edge-worked, engraved, drilled, enamelled or otherwise worked, but not framed, etc.
  production volume 2.67763 m2
  properties: carbon allocation 0.483029 kg, carbon content 0.0175264, carbon content, fossil 0.0175264, carbon content, non-fossil 0, dry mass 27.56 kg, price 81.7282 EUR2005, water content 0, water in wet mass 0 kg, wet mass 27.56 kg

## Inputs from technosphere
- electricity, medium voltage: 0.921534, 0.0344793, 0.438072, 7.60327, 0.638428, 0.0342194 kWh (6 suppliers, which the file names only by identifier); sum of these 9.67 kWh; lognormal variance with pedigree 0.0146, pedigree (2,4,5,5,1)
- extrusion, plastic film: 1.05 kg; lognormal variance with pedigree 0.0132, pedigree (2,3,5,5,1)
- flat glass, uncoated: 4.84 kg; lognormal variance with pedigree 0.0126, pedigree (1,3,5,5,1)
  properties: dry mass 1 kg, wet mass 1 kg
- glazing, double, U<1.1 W/m2K: 1 m2; lognormal variance with pedigree 0.1326, pedigree (1,3,5,5,1)
  properties: carbon content, fossil 0.00359953, dry mass 21.2742 kg, wet mass 21.2742 kg
- polyvinylchloride, emulsion polymerised: 0.134043 kg; lognormal variance with pedigree 0.0126, pedigree (1,3,5,5,1)
  properties: carbon content, fossil 0.387097, dry mass 1 kg, heating value, net 21.5 MJ, wet mass 1 kg
- polyvinylchloride, suspension polymerised: 0.915957 kg; lognormal variance with pedigree 0.0126, pedigree (1,3,5,5,1)
  properties: carbon content, fossil 0.387097, dry mass 1 kg, heating value, net 21.5 MJ, wet mass 1 kg

## Sampling procedure
Company documentation, calculations based on geometry

## Extrapolations
see Geography This dataset has been copied from an original dataset covering the geography RER. The uncertainty has been adjusted accordingly.

## Review by Rolf Frischknecht 2007-11-08
passed
