# acrylic dispersion production, with water, in 58% solution

Dataset: EcoSpold 2, unit process
Geography: RoW
Time period: 1996-01-01 to 2022-12-31
Technology level: current
Classification: ISIC rev.4 ecoinvent: 2022:Manufacture of paints, varnishes and similar coatings, printing ink and mas
Scenario: Business-as-Usual
System model: Substitution, consequential, long-term
Generated by: Maggie Osses
Published in: Althaus H.-J. 2007
Database: ecoinvent
isCopyrightProtected: true
accessRestrictedTo: 1

## General comment
This dataset represents the production of 1 kg of acrylic dispersion 59% in water. Acrylic dispersions are used as binders for industrial coatings for wood, metal and plastics. This dataset is based on a literature source that contains information provided by SIGMA Coatings BV (SZFF 1996).
References:
Paint & Coatings Industry. Acrylic Dispersions for Industrial Coatings with Polymer-Bound Stabilizers, http://www.pcimag.com/articles/82901-acrylic-dispersions-for-industrial-coatings-with-polymer-bound-stabilizers (last accessed on 2017-01-06).
Schweizerische Zentralstelle für Fenster- und Fassadenbau (SZFF) and Swiss Federal Laboratories for Materials Testing and Research (EMPA) (1996) Ökologische Bewertung von Fensterkonstruktionen verschiedener Rahmenmaterialen. EMPA-SZFF-Forschungsbericht. Editor: SZFF.

## Included activities start
The activity starts when the raw materials enter the process.

## Included activities end
This activity ends with the production of 1 kg of acrylic dispersion in water. The manufacturing process takes into account the consumption of raw materials, energy, infrastructure and land use. The generation of solid wastes and emission of heat waste into air are also taken into account. No other emissions into air or into water are included, due to lack of data. No by-product is generated in the process. Consumption of auxiliaries are not included due to the lack of data. Solid wastes are assumed to be sent to hazardous waste incineration.

## Geography
The literature source used is based on information provided by SIGMA Coatings BV. The inventory is assumed to be representative of the global production.

## Technology
This dataset is based on data from a company. See general comment.
References:
Paint & Coatings Industry. Acrylic Dispersions for Industrial Coatings with Polymer-Bound Stabilizers, http://www.pcimag.com/articles/82901-acrylic-dispersions-for-industrial-coatings-with-polymer-bound-stabilizers (last accessed on 2017-01-06).
Schweizerische Zentralstelle für Fenster- und Fassadenbau (SZFF) and Swiss Federal Laboratories for Materials Testing and Research (EMPA) (1996) Ökologische Bewertung von Fensterkonstruktionen verschiedener Rahmenmaterialen. EMPA-SZFF-Forschungsbericht. Editor: SZFF.

## Parameters
- fraction, process water, to air: 0.15 dimensionless; name fraction_PW_to_air; lognormal variance with pedigree 0.092025, pedigree (4,4,3,2,4)
  Literature value. In case when no industry/process specific data are available, default evaporation fraction value is used. This value is 15% and is based on literature (Statistics Canada, 2007 & Shaffer, K.H., 2008, Consumptive water use in the Great Lakes Basin, USGS & Shiklomanov, 2003, World Water Resources at the Beginning of the 21st Century) and has been approved by an expert.

## Reference product
- acrylic dispersion, with water, in 58% solution state: 1 kg; By-product classification allocatable product; CPC 35110: Paints and varnishes and related products
  production volume 3.304 kg
  properties: carbon allocation 0.38281 kg, carbon content 0.660018, carbon content, fossil 0.660018, carbon content, non-fossil 0, dry mass 0.58 kg, heating value, net 16.66 MJ, price 28.3713 EUR2005, water content 0.724138, water in wet mass 0.42 kg, wet mass 1 kg

## Inputs from technosphere
- 1-butanol: 0.0051617 kg; lognormal variance with pedigree 0.034, pedigree (3,5,5,5,1)
  properties: carbon content, fossil 0.648649, dry mass 1 kg, heating value, net 35.99 MJ, wet mass 1 kg
- acrylic binder, with water, in 54% solution state: 0.504143 kg; lognormal variance with pedigree 0.034, pedigree (3,5,5,5,1)
  properties: carbon content, fossil 0.679919, dry mass 0.54 kg, heating value, net 18.18 MJ, water content 0.851852, wet mass 1 kg
- butyl acrylate: 0.0100227 kg; lognormal variance with pedigree 0.034, pedigree (3,5,5,5,1)
  properties: carbon content, fossil 0.756757, dry mass 1 kg, heating value, net 31.22 MJ, wet mass 1 kg
- chemical factory, organics: 4e-10 unit; lognormal variance with pedigree 0.3098, pedigree (2,3,5,4,3)
- chemical, organic: 0.00501136 kg; lognormal variance with pedigree 0.034, pedigree (3,5,5,5,1)
  properties: carbon content, fossil 0.628, dry mass 1 kg, heating value, net 19.03 MJ, wet mass 1 kg
- electricity, medium voltage: 0.0285895, 0.00106968, 0.0135906, 0.235882, 0.0198065, 0.00106161 kWh (6 suppliers, which the file names only by identifier); sum of these 0.3 kWh; lognormal variance with pedigree 0.034, pedigree (3,5,5,5,1)
- ethylene glycol: 0.0400909 kg; lognormal variance with pedigree 0.034, pedigree (3,5,5,5,1)
  properties: carbon content, fossil 0.387097, dry mass 1 kg, heating value, net 23.44 MJ, wet mass 1 kg
- titanium dioxide: 0.25157 kg; lognormal variance with pedigree 0.034, pedigree (3,5,5,5,1)
  properties: dry mass 1 kg, wet mass 1 kg
- waste emulsion paint: -0.00163 kg; lognormal variance with pedigree 0.034, pedigree (3,5,3,5,1)
  properties: carbon content, fossil 0.27, dry mass 1 kg, heating value, net 8.18 MJ, wet mass 1 kg

## Inputs from nature
- Water, unspecified natural origin [natural resource, in water]: 0.000184 m3; lognormal variance with pedigree 0.034, pedigree (3,5,5,5,1)

## Sampling procedure
Literature data based on information provided by SIGMA Coatings BV.

## Extrapolations
This dataset has been copied from an original dataset covering the geography RER. The uncertainty has been adjusted accordingly.

## Review by Emilia Moreno Ruiz 2017-08-09
This dataset was additionally reviewed in a separate review process by Eric Johnson of Atlantic Consulting as well as Emilia Moreno Ruiz and Gregor Wernet of ecoinvent.
