# iron ore mine operation, 46% Fe

Dataset: EcoSpold 2, unit process
Geography: GLO
Time period: 1999-01-01 to 2022-12-31
Technology level: current
Classification: EcoSpold01Categories: metals/extraction
Classification: ISIC rev.4 ecoinvent: 0710:Mining of iron ores
Tags: ConvertedDataset
Scenario: Business-as-Usual
System model: Substitution, consequential, long-term
Share of production covered: 65 %
Generated by: Hans-Jörg Althaus
Published in: Classen M. 2009
Database: ecoinvent
isCopyrightProtected: true
accessRestrictedTo: 1

## General comment
The dust emissions are estimated to be the same as in bauxite mining.
[This dataset was already contained in the ecoinvent database version 2. It was not individually updated during the transfer to ecoinvent version 3. Life Cycle Impact Assessment results may still have changed, as they are affected by changes in the supply chain, i.e. in other datasets. This dataset was generated following the ecoinvent quality guidelines for version 2. It may have been subject to central changes described in the ecoinvent version 3 change report (http://www.ecoinvent.org/database/ecoinvent-version-3/reports-of-changes/), and the results of the central updates were reviewed extensively. The changes added e.g. consistent water flows and other information throughout the database. The documentation of this dataset can be found in the ecoinvent reports of version 2, which are still available via the ecoinvent website. The change report linked above covers all central changes that were made during the conversion process.]

## Included activities end
Mining with its direct land use and transport of the crude ore to the enrichment plant.

## Geography
Data relate to the global average

## Technology
Data relate to open mining

## Reference product
- iron ore, crude ore, 46% Fe: 1 kg; By-product classification allocatable product; CPC 14100: Iron ores and concentrates, other than roasted iron pyrites
  production volume 1.98261e12 kg
  properties: carbon allocation 0 kg, carbon content 0, carbon content, fossil 0, carbon content, non-fossil 0, dry mass 1 kg, price 0.04 EUR2005, water content 0, water in wet mass 0 kg, wet mass 1 kg

## Inputs from technosphere
- blasting: 0.00027099 kg; lognormal variance with pedigree 0.0002, pedigree (1,2,5,3,1)
- diesel, burned in building machine: 0.025523 MJ; lognormal variance with pedigree 0.1201, pedigree (1,2,5,1,1)
  properties: heating value, net 1 MJ
- electricity, medium voltage: 0.0014237 kWh; lognormal variance with pedigree 0.0002, pedigree (1,2,5,3,1)
- mine infrastructure, iron: 8.3333e-13 unit; lognormal variance with pedigree 0.326, pedigree (4,5,5,1,1)
- recultivation, iron mine: 1.7006e-6 m2; lognormal variance with pedigree 0.326, pedigree (4,5,5,1,1)

## Inputs from nature
- Iron [natural resource, in ground]: 0.4619 kg; lognormal variance with pedigree 0.0001, pedigree (1,2,5,1,1)
- Occupation, mineral extraction site [natural resource, land]: 0.00012 m2*year; lognormal variance with pedigree 0.0526, pedigree (2,4,5,1,1)
- Transformation, from unspecified [natural resource, land]: 2.1258e-6 m2; lognormal variance with pedigree 0.1326, pedigree (2,4,5,1,1)
- Transformation, to mineral extraction site [natural resource, land]: 2.1258e-6 m2; lognormal variance with pedigree 0.1326, pedigree (2,4,5,1,1)

## Emissions to nature
- Particulate Matter, < 2.5 um [air, non-urban air or from high stacks]: 0.00014415 kg; lognormal variance with pedigree 0.3267, pedigree (2,5,5,3,3)
- Particulate Matter, > 10 um [air, non-urban air or from high stacks]: 0.0014415 kg; lognormal variance with pedigree 0.0667, pedigree (2,5,5,3,3)
- Particulate Matter, > 2.5 um and < 10um [air, non-urban air or from high stacks]: 0.0012973 kg; lognormal variance with pedigree 0.1467, pedigree (2,5,5,3,3)

## Sampling procedure
based on literature

## Review by Roland Hischier 2007-08-13
passed
