# industrial machine production, heavy, unspecified

Dataset: EcoSpold 2, unit process
Geography: RoW
Time period: 1999-01-01 to 2022-12-31
Technology level: current
Classification: EcoSpold01Categories: construction processes/machinery
Classification: ISIC rev.4 ecoinvent: 2824:Manufacture of machinery for mining, quarrying and construction
Tags: ConvertedDataset
Scenario: Business-as-Usual
System model: Substitution, consequential, long-term
Generated by: Daniel Kellenberger (obsolete)
Published in: Kellenberger D. 2007
Database: ecoinvent
isCopyrightProtected: true
accessRestrictedTo: 1

## General comment
This infrastructure is based on the materialization of a rock crusher . The transportation distances are estimated and the transportation requirements added. This module should not be used if its relative importance would be high in a certain environmental inventory. Service life declared by the producer: 25 years. The functional unit is one kilogram.
[This dataset was already contained in the ecoinvent database version 2. It was not individually updated during the transfer to ecoinvent version 3. Life Cycle Impact Assessment results may still have changed, as they are affected by changes in the supply chain, i.e. in other datasets. This dataset was generated following the ecoinvent quality guidelines for version 2. It may have been subject to central changes described in the ecoinvent version 3 change report (http://www.ecoinvent.org/database/ecoinvent-version-3/reports-of-changes/), and the results of the central updates were reviewed extensively. The changes added e.g. consistent water flows and other information throughout the database. The documentation of this dataset can be found in the ecoinvent reports of version 2, which are still available via the ecoinvent website. The change report linked above covers all central changes that were made during the conversion process.]

## Included activities end
Includes the most important materials and the transportation of the new parts to the assembly plant. No disposal is included as it is assumed that all materials are recycled. No energy for assembling is included.

## Geography
Certain elementary flows or intermediate product flows are extrapolated from Swiss conditions.

## Technology
Rock crusher type Nordberg HP400 SX produced in the USA in 1999, used as basis

## Reference product
- industrial machine, heavy, unspecified: 1 kg; By-product classification allocatable product; CPC 444: Machinery for mining, quarrying and construction, and parts thereof
  production volume 2.67763 kg
  properties: carbon allocation 0 kg, carbon content 0, price 0.547615 EUR2005

## Inputs from technosphere
All rows: lognormal variance with pedigree 0.038, pedigree (1,5,5,5,3)
- aluminium, cast alloy: 0.00023808 kg
  properties: dry mass 1 kg, wet mass 1 kg
- aluminium, wrought alloy: 0.00050592 kg
  properties: dry mass 1 kg, wet mass 1 kg
- brass: 2.8e-5 kg
  properties: dry mass 1 kg, wet mass 1 kg
- bronze: 0.0148 kg
  properties: dry mass 1 kg, wet mass 1 kg
- cast iron: 0.0758 kg
  properties: carbon content, fossil 0.04, dry mass 1 kg, wet mass 1 kg
- epoxy resin, liquid: 0.0035 kg
  properties: carbon content, fossil 0.42325, dry mass 1 kg, heating value, net 12.82 MJ, wet mass 1 kg
- section bar rolling, steel: 0.905 kg
- steel, low-alloyed, hot rolled: 0.905 kg
  properties: carbon content, fossil 0.005, dry mass 1 kg, wet mass 1 kg

## Sampling procedure
most data from LCA study

## Extrapolations
See geography This dataset has been copied from an original dataset covering the geography RER. The uncertainty has been adjusted accordingly.

## Review by Roberto Dones 2003-07-30
passed
