# clear-cutting, secondary forest to arable land, annual crop

Dataset: EcoSpold 2, unit process
Geography: TH
Time period: 2010-01-01 to 2022-12-31
Technology level: current
Classification: ISIC rev.4 ecoinvent: 0161:Support activities for crop production
Tags: WFLDB
Scenario: Business-as-Usual
System model: Substitution, consequential, long-term
Generated by: Vincent Rossi
Database: ecoinvent
isCopyrightProtected: true
accessRestrictedTo: 1

## General comment
This dataset represents the interventions associated with the clear-cutting of secondary forest for the provision of arable land tenure. NPP (net primary productivity of a given land, in kg C / m2 and year) and VEG (above-ground biomass, below-ground biomass and dead organic matter) values are parameterized.
NPP values are reported by Haberl et al. (2007)
VEG values have the following sources:
- Forests: Global Forest Resources Assessment 2010: http://www.fao.org/forestry/fra/fra2010/en/
- Grassland: IPCC 2006 Guidelines, Volume 6, Table 6.4. All values in tonne C/ha, converted to carbon based on 47% carbon content of dry matter biomass (see for example section 6.2.1.4 of IPCC 2006).
- Crops: Cveg croplands, based on Table 11 of the European Commission decision.* All values in tonne C/ha.
* C(2010) 3751: COMMISSION DECISION of 10 June 2010 on guidelines for the calculation of land carbon stocks for the purpose of Annex V to Directive 2009/28/EC, Official Journal of the European Union, L 151/19. Exceptions based on the Table 12 of the EC decision: Coconuts, Jatropha, Jojoba Seeds, Oil palm fruit, Sugar cane
Distinction is made between primary and secondary forests. The respective land area of each type forest is known from FAOSTAT data. Based on empirical values, it is considered that the secondary VEG is 74% of the primary VEG. The same ratio is applied as the weighted average between primary and secondary forest is always equal to the GFRA 2010 value.

## Included activities start
This activity starts with the average state of secondary forest.

## Included activities end
The dataset includes the carbon stored in Above-Ground Biomas (AGB), Below-Ground Biomass (BGB) and Dead Organic Matter (DOM) pools. It includes the fluxes from these carbon pools in terms of CO2 and other trace gases caused by the burning of biomass. It also includes a rough estimation for the machine use required for the clear-cutting with European forestry data and the associated occupation impact.The loss/gain of Soil Organic Carbon (SOC) usually associated with a land tranformation is accounted for in the downstream activity using the arable land tenure, given that it depends on the subsequent land use practice.
This activity ends with the provision of arable land tenure, measured in unit kg carbon Potential Net Primary Production (NPP).

## Parameters
- Above and below ground biomass: 4.284 dimensionless; lognormal variance with pedigree 0.017425, pedigree (2,5,2,2,3)
- LUC_crop_specific: 1 dimensionless
  This parameter allows to switch between a 'crop specific' and a 'country specific' approach when calculating the LUC of a crop. By default, the chosen approach is 'crop specific', so the value of the parameter is 1. If you want to apply a 'country specific' approach, turn the parameter to 0.
- NPP0, net primary productivity: 1.022 dimensionless; lognormal variance with pedigree 0.022825, pedigree (2,5,2,2,3)

## Reference product
- land tenure, arable land, measured as carbon net primary productivity, annual crop: 1 kg; By-product classification allocatable product; CPC 7: Financial and related services; real estate services; and rental and leasing services
  production volume 1.80407e7 kg
  properties: carbon allocation 1 kg, carbon content 1, carbon content, non-fossil 1, dry mass 1 kg, price 0 EUR2005, water content 0, water in wet mass 0 kg, wet mass 1 kg

## Inputs from technosphere
- diesel, burned in building machine: 1.17177 MJ
  properties: heating value, net 1 MJ
- power sawing, without catalytic converter: 0.00275212 hour

## Inputs from nature
- Carbon, organic, in soil or biomass stock [natural resource, in ground]: 4.19178 kg
- Energy, gross calorific value, in biomass [natural resource, biotic]: 167.671 MJ
- Occupation, construction site [natural resource, land]: 6.7406e-6 m2*year
- Transformation, from forest, secondary (non-use) [natural resource, land]: 0.978474 m2
- Transformation, to arable land, unspecified use [natural resource, land]: 0.978474 m2

## Emissions to nature
- Acetaldehyde [air, non-urban air or from high stacks]: 0.00121096 kg
- Acetic acid [air, non-urban air or from high stacks]: 0.00391233 kg
- Acetone [air, non-urban air or from high stacks]: 0.00115507 kg
- Acetonitrile [air, non-urban air or from high stacks]: 0.000335342 kg
- Ammonia [air, non-urban air or from high stacks]: 0.00242192 kg
- Benzene [air, non-urban air or from high stacks]: 0.000745205 kg
- Benzene, ethyl- [air, non-urban air or from high stacks]: 4.47123e-5 kg
- Carbon dioxide, from soil or biomass stock [air, non-urban air or from high stacks]: 14.7178 kg
- Carbon monoxide, from soil or biomass stock [air, non-urban air or from high stacks]: 0.193753 kg
- Cyanide [air, non-urban air or from high stacks]: 0.00633425 kg
- Dinitrogen monoxide [air, non-urban air or from high stacks]: 0.000372603 kg
- Ethane [air, non-urban air or from high stacks]: 0.00223562 kg
- Ethanol [air, non-urban air or from high stacks]: 3.35342e-5 kg
- Ethylene [air, non-urban air or from high stacks]: 0.00363288 kg
- Ethyne [air, non-urban air or from high stacks]: 7.45205e-5 kg
- Formaldehyde [air, non-urban air or from high stacks]: 0.00260822 kg
- Formic acid [air, non-urban air or from high stacks]: 0.00204932 kg
- Furan [air, non-urban air or from high stacks]: 0.00894247 kg
- Isoprene [air, non-urban air or from high stacks]: 2.98082e-5 kg
- Methane, from soil or biomass stock [air, non-urban air or from high stacks]: 0.0126685 kg
- Methanol [air, non-urban air or from high stacks]: 0.00372603 kg
- Nitrogen oxides [air, non-urban air or from high stacks]: 0.00298082 kg
- PAH, polycyclic aromatic hydrocarbons [air, non-urban air or from high stacks]: 4.65753e-5 kg
- Particulate Matter, < 2.5 um [air, non-urban air or from high stacks]: 0.0169534 kg
- Particulate Matter, > 2.5 um and < 10um [air, non-urban air or from high stacks]: 0.015463 kg
- Phenol [air, non-urban air or from high stacks]: 1.11781e-5 kg
- Propane [air, non-urban air or from high stacks]: 0.000279452 kg
- Propene [air, non-urban air or from high stacks]: 0.00102466 kg
- Sulfur dioxide [air, non-urban air or from high stacks]: 0.00106192 kg
- Terpenes [air, non-urban air or from high stacks]: 0.000279452 kg
- Toluene [air, non-urban air or from high stacks]: 0.000465753 kg
- Xylene [air, non-urban air or from high stacks]: 0.000111781 kg

## Sampling procedure
Literature data
The reference product of the clear-cutting activitiy is Potential Net Primary Production (NPP0) measured in unit of kg carbon. It is up to the arable land-using activity to utilise the lands capacity to produce biomass

## Extrapolations
This dataset has been extrapolated from year 2009 to the year of the calculation
