# polysulfide production, sealing compound

Dataset: EcoSpold 2, unit process
Geography: RoW
Time period: 1996-01-01 to 2022-12-31
Technology level: current
Classification: EcoSpold01Categories: plastics/others
Classification: ISIC rev.4 ecoinvent: 2013:Manufacture of plastics and synthetic rubber in primary forms
Tags: ConvertedDataset
Scenario: Business-as-Usual
System model: Substitution, consequential, long-term
Generated by: Martin Lehmann
Published in: Kellenberger D. 2007
Database: ecoinvent
isCopyrightProtected: true
accessRestrictedTo: 1

## General comment
This dataset is primarily used in the glazing production.
[This dataset was already contained in the ecoinvent database version 2. It was not individually updated during the transfer to ecoinvent version 3. Life Cycle Impact Assessment results may still have changed, as they are affected by changes in the supply chain, i.e. in other datasets. This dataset was generated following the ecoinvent quality guidelines for version 2. It may have been subject to central changes described in the ecoinvent version 3 change report (http://www.ecoinvent.org/database/ecoinvent-version-3/reports-of-changes/), and the results of the central updates were reviewed extensively. The changes added e.g. consistent water flows and other information throughout the database. The documentation of this dataset can be found in the ecoinvent reports of version 2, which are still available via the ecoinvent website. The change report linked above covers all central changes that were made during the conversion process.]

## Included activities end
The dataset describes the raw materials and processes required to produce a polysulphide sealing compound. Included is heat, electricity, and the infrastructure, but no extra transport activities apart from the ones related to the raw materials. Input materials are crushed limestone (filling material), chemicals, a hardening paste and rigid foam (polyurethane).

## Geography
Data based on a number of confidential reports.

## Technology
Polysulphide sealing compound is produced by heating a mixture of filling material, chemicals, polyurethane and a hardening paste.

## Reference product
- polysulfide, sealing compound: 1 kg; By-product classification allocatable product; CPC 347: Plastics in primary forms
  production volume 2.67763 kg
  properties: carbon allocation 0.1564 kg, carbon content 0.1564, carbon content, fossil 0.1564, carbon content, non-fossil 0, dry mass 1 kg, heating value, net 4.74 MJ, price 3.2 EUR2005, water content 0, water in wet mass 0 kg, wet mass 1 kg

## Inputs from technosphere
- chemical factory, organics: 4e-10 unit; lognormal variance with pedigree 0.3146, pedigree (2,4,5,5,1)
- chemical, inorganic: 0.37 kg; lognormal variance with pedigree 0.0126, pedigree (1,3,5,5,1)
  properties: carbon content, fossil 0.003, dry mass 1 kg, wet mass 1 kg
- electricity, medium voltage: 0.0156289, 0.000584758, 0.00742955, 0.128949, 0.0108275, 0.000580349 kWh (6 suppliers, which the file names only by identifier); sum of these 0.164 kWh; lognormal variance with pedigree 0.0126, pedigree (1,3,5,5,1)
- heat, district or industrial, other than natural gas: 0.000632758, 0.362367 MJ (2 suppliers, which the file names only by identifier); sum of these 0.363 MJ; lognormal variance with pedigree 0.0126, pedigree (1,3,5,5,1)
  properties: heating value, net 1 MJ
- lime, packed: 0.47 kg; lognormal variance with pedigree 0.0126, pedigree (1,3,5,5,1)
  properties: carbon content, fossil 0.117492, dry mass 0.998 kg, water content 0.00200401, wet mass 1 kg
- manganese: 0.015 kg; lognormal variance with pedigree 0.0126, pedigree (1,3,5,5,1)
  properties: dry mass 1 kg, wet mass 1 kg
- polyurethane, rigid foam: 0.145 kg; lognormal variance with pedigree 0.0126, pedigree (1,3,5,5,1)
  properties: carbon content, fossil 0.69089, dry mass 1 kg, heating value, net 30.67 MJ, wet mass 1 kg

## Sampling procedure
Company documentation

## Extrapolations
see Geography This dataset has been copied from an original dataset covering the geography RER. The uncertainty has been adjusted accordingly.

## Review by Rolf Frischknecht 2007-11-07
passed
