# metal coating facility construction

Dataset: EcoSpold 2, unit process
Geography: RoW
Time period: 2000-01-01 to 2022-12-31
Technology level: current
Classification: ISIC rev.4 ecoinvent: 4100:Construction of buildings
Classification: EcoSpold01Categories: metals/refinement
Tags: ConvertedDataset
Scenario: Business-as-Usual
System model: Substitution, consequential, long-term
Share of production covered: 0 %
Generated by: Niels Jungbluth
Published in: Althaus H.-J. 2000
Database: ecoinvent
isCopyrightProtected: true
accessRestrictedTo: 1

## General comment
Inventory of plant for making selective coatings on metal sheets. Production capacity 100000 m2 of coatings per year. Life time 30a.
[This dataset was already contained in the ecoinvent database version 2. It was not individually updated during the transfer to ecoinvent version 3. Life Cycle Impact Assessment results may still have changed, as they are affected by changes in the supply chain, i.e. in other datasets. This dataset was generated following the ecoinvent quality guidelines for version 2. It may have been subject to central changes described in the ecoinvent version 3 change report (http://www.ecoinvent.org/database/ecoinvent-version-3/reports-of-changes/), and the results of the central updates were reviewed extensively. The changes added e.g. consistent water flows and other information throughout the database. The documentation of this dataset can be found in the ecoinvent reports of version 2, which are still available via the ecoinvent website. The change report linked above covers all central changes that were made during the conversion process.]

## Included activities end
Basic assumption for land use and buildings, no machinery data.

## Geography
Production plants in DE, DK, US and CH.

## Technology
Sputtering, black majic and black chrome coating.

## Time period
Environmental report.

## Reference product
- metal coating facility: 1 unit; By-product classification allocatable product; CPC 53269: Other constructions for manufacturing
  production volume 2.67763 unit
  properties: carbon allocation 0 kg, carbon content 0, price 73333.2 EUR2005

## Inputs from technosphere
- building, hall: 524 m2; lognormal variance with pedigree 0.3046, pedigree (3,3,5,5,1)

## Inputs from nature
- Occupation, industrial area [natural resource, land]: 48700 m2*year; lognormal variance with pedigree 0.0446, pedigree (3,3,5,5,1)
- Transformation, from unspecified [natural resource, land]: 1130 m2; lognormal variance with pedigree 0.1246, pedigree (3,3,5,5,1)
- Transformation, to industrial area [natural resource, land]: 1130 m2; lognormal variance with pedigree 0.1246, pedigree (3,3,5,5,1)

## Sampling procedure
Environmental report and personal communication.

## Extrapolations
This dataset has been copied from an original dataset covering the geography RER. The uncertainty has been adjusted accordingly.

## Review by Hans-Jörg Althaus 2003-06-03
passed
