# transport, passenger car, large size, petrol, EURO 4

Dataset: EcoSpold 2, unit process
Geography: RoW
Time period: 2012-01-01 to 2022-12-31
Technology level: current
Classification: ISIC rev.4 ecoinvent: 4922:Other passenger land transport
Tags: internal combustion engine
Scenario: Business-as-Usual
System model: Substitution, consequential, long-term
Generated by: Andrew Simons
Database: ecoinvent
isCopyrightProtected: true
accessRestrictedTo: 1

## General comment
This dataset represents the service of transport in a passenger car for a journey length of 1vkm. The data used for the creation of the global datasets are initially based on European data. Fuel consumption and emissions are for average vehicle use and not representative of a specific driving cycle. The dataset is parametrized with respect to vehicle size, fuel consumption and vehicle lifetime.
Datasets for three different passenger car categories are available in ecoinvent in view of size: small, medium and large.
The category “small” includes passenger cars with engine size up to 1.4 liters. The average weight of this category is estimated to be 1200 kg.
The category “medium” includes passenger cars with engine size between 1.4 and 2.0 liters. The average weight of this category is estimated to be 1600 kg.
The category “large” includes passenger cars with engine size larger than 2.0 liters. The average weight of this category is estimated to be 2000 kg.
The passenger car size influences the amount of both exhaust and non-exhaust emissions. The exhaust emissions caused by the burning of fuel are divided into two groups: fuel dependent emissions (dependent on fuel type and quantity) and Euro class dependent emissions which reflect the emission standards which the vehicle complies with. Three classes of Euro engine type are considered: Euro 3, Euro 4 and Euro 5. The higher the class (e.g. Euro 5), the lower the emissions and viceversa. The Euro engine regulation is set by the European Commission “in order to limit as much as possible the negative impact of road vehicles on the environment and health” (European Commission 2012). This dataset considers a small petrol passenger car of Euro 5 class. Also included within the direct exchanges to the environment are the fuel evaporation emissions from the fuel tank, relevant to petrol vehicles only.
Non-exhaust emissions are those resulting from tyre, brake and road wear. These emissions are considered as by-products.

Reference: European Commission - Mobility and transport. (n.d.). Euro 5 and Euro 6 standards: reduction of pollutant emissions from light. Retrieved May 31, 2012, from http://ec.europa.eu/transport/index_en.htm: http://ec.europa.eu/transport/urban/vehicles/doc/legislation_guide_other.pdf

## Included activities start
From combustion of fuel in the engine. The dataset takes as input the infrastructure of the car and road network, the materials and efforts needed for maintenance of these and the fuel consumed in the vehicle for the journey.

## Included activities end
The activity ends with the transport over 1vkm and the emissions of exhaust and non-exhaust emissions into air, water and soil.

The dataset includes the construction, operation, maintenance and disposal of the vehicle and road infrastructure. Operation of the vehicle includes all the direct emissions produced by fuel combustion and evaporation as well as from tyre, brake and road wear.

The dataset doesn't specifically model cold start emissions. These are assumed to be included in the data for average driving which was used.

## Technology
Transport in a passenger car with internal combustion engine, fueled by petrol. The size is large, with engine size above 2.0 litres and weight of approximately 2000 kg.
Technology classifications are based on those used widely within the works of the European Environment Agency, particularly in the Emissions Inventory Guidebook. The Tremove model - which is also used to generate fuel consumption and emission factors for the datasets presented here - follows this classification system.

## Parameters
- annual total vkm: 4.08898e10 km; name annual_vkm; lognormal variance with pedigree 0.0021, pedigree (2,2,2,4,1)
  Based on Tremove (2009)
- co2 emissions per kg petrol: 3.18 kg; name co2_kg_petrol; lognormal variance with pedigree 0.0021, pedigree (2,2,2,4,1)
  Constant for all petrol vehicles
- emissions from brake friction: 4.45e-9 kg/kg vehicle; name brake_wear_emissions; lognormal variance with pedigree 0.0021, pedigree (2,2,2,4,1)
  average (small, medium and large weight class) emissions produced per kg vehicle.
  Calculation of non-exhaust emissions (tyre, brake and road wear emissions as well as petrol evaporation emissions) are based on: Ntziachristos, L., Boulter, P. (2009b). EMEP/EEA air pollutant emissions inventory guidebook 2009: Road vehicle tyre and brake wear; Road surface wear. Copenhagen, European Environment Agency
- emissions from road abrasion: 9.79e-9 kg/kg vehicle; name road_wear_emissions; lognormal variance with pedigree 0.0021, pedigree (2,2,2,4,1)
  average (small, medium and large weight class) emissions produced per kg vehicle. example:
  small medium large average
  kg/km kg/km kg/km kg/km
  1.25E-08 9.38E-09 7.500E-09 9.79E-09
  Calculation of non-exhaust emissions (tyre, brake and road wear emissions as well as petrol evaporation emissions) are based on: Ntziachristos, L., Boulter, P. (2009b). EMEP/EEA air pollutant emissions inventory guidebook 2009: Road vehicle tyre and brake wear; Road surface wear. Copenhagen, European Environment Agency
- emissions from tyre abrasion: 5.725e-8 kg/kg vehicle; name tyre_wear_emissions; lognormal variance with pedigree 0.0021, pedigree (2,2,2,4,1)
  average (small, medium and large weight class) emissions produced per kg vehicle. example:
  small medium large average
  kg/vkm kg/vkm kg/vkm kg/vkm
  6.611E-08 6.343E-08 6.258E-08 6.404E-08
  Calculation of non-exhaust emissions (tyre, brake and road wear emissions as well as petrol evaporation emissions) are based on: Ntziachristos, L., Boulter, P. (2009b). EMEP/EEA air pollutant emissions inventory guidebook 2009: Road vehicle tyre and brake wear; Road surface wear. Copenhagen, European Environment Agency.
- european to global total vkm scaling factor: 5.7 dimensionless; name global_scaling_factor; lognormal variance with pedigree 0.0118, pedigree (3,3,4,4,1)
  Estimation
- fuel consumption constant: 2.9288e-5 dimensionless; name fc_constant; = 2.9288E-05; lognormal variance with pedigree 0.0021, pedigree (2,2,2,4,1)
  Determined from analysing the fuel consumption for vehicles in the Tremove model (2009)
- fuel consumption of basis vehicle: 0.07431 dimensionless; name fc_basis_vehicle; lognormal variance with pedigree 0.0021, pedigree (2,2,2,4,1)
  Fuel consumption as derived from the source data for each vehicle type, size and emissions standard
- gross vehicle weight: 2097.2 kg; name gross_vehicle_weight; = vehicle_weight+(1.62*60); lognormal variance with pedigree 0.0015, pedigree (2,2,2,1,1)
  It corresponds to the following formula:
  weight of the vehicle + ((average load * 60 kg / 1000).
  The average load is estimated to be 1.6 passengers and 60 kg is the weight of a passenger.
  Based on: TREMOVE v2.7b, ransport & Mobility Leuven, 2009
- lifetime of the vehicle: 150000 km; name vehicle_lifetime_km; lognormal variance with pedigree 0.0021, pedigree (2,2,2,4,1)
  distance capacity in the assumed vehicle lifetime.
  Reference: Althaus & gauch, Vergleichende Oekobilanz individueller Mobilität: Elektromobilität versus konventionelle Mobilität mit Bio- und fossilen Treibstoffen, EMPA, Dübendorf, 2010
- passenger load factor: 97.2 kg; name LF_passengers; = passengers*60; lognormal variance with pedigree 0.0021, pedigree (2,2,2,4,1)
  Number of passengers multiplied by 60 kg per passenger
- passengers: 1.62 unit; lognormal variance with pedigree 0.0021, pedigree (2,2,2,4,1)
  Average number of passengers in passenger car 1.62
- scaling factor: 1.6129 dimensionless; name scaling_factor; = (vehicle_weight/1240); lognormal variance with pedigree 0.0012, pedigree (2,1,1,1,1)
  The weight of a vehicle determines the non-exhaust emissions of tyre, brake and road wear, reported in kg/kg vehicle.
  The non-exhaust emissions (kg) are calculated multiplying vehicle’s non-exhaust emissions (kg/kg vehicle) by the scaled vehicle weight (kg vehicle).
  The input passenger car weighs 1240 kg. The scaling factor is given by vehicle weight/input passenger car weight. Therefore: the scaling factor is 1200/1240 for small passenger cars.
- so2 emissions per kg petrol: 2e-5 kg; name so2_kg_petrol; = 2.0e-5; lognormal variance with pedigree 0.0021, pedigree (2,2,2,4,1)
  Constant for all petrol vehicles
- weight of the basis vehicle: 1240 kg/unit; name basis_vehicle_weight; lognormal variance with pedigree 0.0021, pedigree (2,2,2,4,1)
  The basis vehicle is the one on which the original life cycle inventory was conducted. It is representative of a VW Golf.
- weight of the vehicle: 2000 kg/unit; name vehicle_weight; lognormal variance with pedigree 0.0015, pedigree (2,2,2,1,1)
  A scaling factor is used to adjust to the vehicle weight chosen in this dataset.
  The weight of a vehicle determines the non-exhaust emissions of tyre, brake and road wear, reported in kg/kg vehicle. The non-exhaust emissions (kg) are calculated multiplying vehicle’s non-exhaust emissions (kg/kg vehicle) by the scaled vehicle weight (kg vehicle).
  Passenger cars are divided into three classes of weight, whereas this dataset has implemented the value valid for a large car: 2000 kg.

## Reference product
- transport, passenger car, large size, petrol, EURO 4: 1 km; By-product classification allocatable product; CPC 64119: Other land transportation services of passengers, n.e.c.
  production volume 1.92182e11 km
  properties: carbon allocation 0 kg, carbon content 0, price 0.213153 EUR2005

## Inputs from technosphere
- brake wear emissions, passenger car: -9.33254e-6 kg; lognormal variance with pedigree 0.0021, pedigree (2,2,2,4,1)
- passenger car maintenance: 1.07527e-5 unit; lognormal variance with pedigree 0.0015, pedigree (2,2,5,1,1)
- passenger car, petrol/natural gas: 0.0133333 kg; lognormal variance with pedigree 0.0021, pedigree (2,2,5,4,1)
- petrol, low-sulfur: 0.0771568 kg; lognormal variance with pedigree 0.0021, pedigree (2,2,5,4,1)
  properties: carbon content, fossil 0.865, dry mass 1 kg, heating value, net 42.5 MJ, wet mass 1 kg
- road: 0.0011262 m*year; lognormal variance with pedigree 0.0015, pedigree (2,2,5,1,1)
- road maintenance: 0.000265427 m*year; lognormal variance with pedigree 0.0015, pedigree (2,2,5,1,1)
- road wear emissions, passenger car: -2.05316e-5 kg; lognormal variance with pedigree 0.0021, pedigree (2,2,2,4,1)
- tyre wear emissions, passenger car: -0.000120065 kg; lognormal variance with pedigree 0.0021, pedigree (2,2,2,4,1)

## Emissions to nature
All rows: lognormal variance with pedigree 0.0021, pedigree (2,2,5,4,1)
- 1-Pentene [air, urban air close to ground]: 5.073e-7 kg
- 2-Methylpentane [air, urban air close to ground]: 7.417e-6 kg
- Acetaldehyde [air, urban air close to ground]: 2.238e-7 kg
- Acetone [air, urban air close to ground]: 1.82e-7 kg
- Acrolein [air, urban air close to ground]: 5.67e-8 kg
- Ammonia [air, urban air close to ground]: 2.3147e-6 kg
- Benzaldehyde [air, urban air close to ground]: 6.565e-8 kg
- Benzene [air, urban air close to ground]: 4.263e-6 kg
- Butane [air, urban air close to ground]: 7.764e-6 kg
- Cadmium II [air, urban air close to ground]: 7.71568e-10 kg
- Carbon dioxide, fossil [air, urban air close to ground]: 0.245359 kg
- Carbon monoxide, fossil [air, urban air close to ground]: 0.0004052 kg
- Chromium III [air, urban air close to ground]: 3.85784e-9 kg
- Chromium VI [air, urban air close to ground]: 7.71568e-12 kg
- Copper ion [air, urban air close to ground]: 1.31167e-7 kg
- Cyclohexane (for all cycloalkanes) [air, urban air close to ground]: 3.402e-7 kg
- Dinitrogen monoxide [air, urban air close to ground]: 1.00304e-5 kg
- Ethane [air, urban air close to ground]: 1.269e-6 kg
- Ethylene [air, urban air close to ground]: 2.645e-8 kg
- Ethylene oxide [air, urban air close to ground]: 2.179e-6 kg
- Formaldehyde [air, urban air close to ground]: 5.073e-7 kg
- Heptane [air, urban air close to ground]: 2.208e-7 kg
- Hexane [air, urban air close to ground]: 4.805e-7 kg
- Lead II [air, urban air close to ground]: 1.15735e-10 kg
- Mercury II [air, urban air close to ground]: 5.40098e-12 kg
- Methane, fossil [air, urban air close to ground]: 2.027e-5 kg
- Methyl ethyl ketone [air, urban air close to ground]: 1.492e-8 kg
- NMVOC, non-methane volatile organic compounds [air, urban air close to ground]: 6.99e-5 kg
- Nickel II [air, urban air close to ground]: 5.40098e-9 kg
- Nitrogen oxides [air, urban air close to ground]: 4.351e-5 kg
- PAH, polycyclic aromatic hydrocarbons [air, urban air close to ground]: 2.68506e-9 kg
- Particulate Matter, < 2.5 um [air, urban air close to ground]: 1.044e-6 kg
- Pentane [air, urban air close to ground]: 8.81e-6 kg
- Propane [air, urban air close to ground]: 5.642e-6 kg
- Propene [air, urban air close to ground]: 1.481e-7 kg
- Propylene oxide [air, urban air close to ground]: 1.14e-6 kg
- Selenium IV [air, urban air close to ground]: 7.71568e-10 kg
- Styrene [air, urban air close to ground]: 3.014e-7 kg
- Sulfur dioxide [air, urban air close to ground]: 1.54314e-6 kg
- Toluene [air, urban air close to ground]: 7.746e-6 kg
- Zinc II [air, urban air close to ground]: 7.71568e-8 kg
- m-Xylene [air, urban air close to ground]: 3.341e-6 kg
- o-Xylene [air, urban air close to ground]: 8.145e-7 kg

## Sampling procedure
Literature
