# cement production, type general use

Dataset: EcoSpold 2, unit process
Geography: CO
Time period: 2014-01-01 to 2022-12-31
Technology level: current
Classification: ISIC rev.4 ecoinvent: 2394:Manufacture of cement, lime and plaster
Synonyms: General Use according to NTC 121/ASTM C1157; Uso General according to NTC 121/ASTM C1157
Tags: combined production
Scenario: Business-as-Usual
System model: Substitution, consequential, long-term
Share of production covered: 81 %
Generated by: Simon Gmünder
Published in: Silva, F. B. 2017
Database: ecoinvent
isCopyrightProtected: true
accessRestrictedTo: 1

## General comment
The dataset describes the production of cement type general use (uso general) according to technical norm NTC 121 (Icontec, 2014), which is based on the standard specification for hydraulic cement (ASTM standard n° C1157).
The weight composition of the cement is: 55% clinker, 2.2% gypsum, 14.3% blast funrace slag, 14.3% fly ash and 14.3% limestone (rounded numbers).
The cement density is 3g/ml and the resitance is 24-30MPa according to the NTC 220 (Cemex and Argos).

## Included activities start
This activity starts with the reception of raw materials.

## Included activities end
This activity ends with the cement produced in the cement mill. The dataset includes packaging in cement bags. No production waste is included.

## Geography
Representative production of cement type GU in Colombia. Data based from main cement producers and personal comunications with local experts.

## Technology
Represent the current technology for cement production in Colombia.

## Time period
The production volume of 2016 is considered. Data from sustainability reports of 2014 to 2017 is used.

## Reference product
- cement, type general use: 1 kg; By-product classification allocatable product; CPC 374: Plaster, lime and cement
  production volume 9.675e9 kg
  properties: carbon allocation 0 kg, carbon content 0, carbon content, fossil 0, carbon content, non-fossil 0, dry mass 1 kg, price 0.0615 EUR2005, water content 0, water in wet mass 0 kg, wet mass 1 kg

## Inputs from technosphere
- cement factory: 5.36e-11 unit; lognormal variance with pedigree 0.0126, pedigree (3,5,1,5,1)
- clay: 0.142667 kg; lognormal variance with pedigree 0.0032, pedigree (3,3,1,1,1)
  properties: dry mass 0.965 kg, water content 0.0362694, wet mass 1 kg
- clinker: 0.55 kg; lognormal variance with pedigree 0.0032, pedigree (3,3,1,1,1)
  properties: dry mass 1 kg, wet mass 1 kg
- electricity, medium voltage: 0.037 kWh; lognormal variance with pedigree 0.0053, pedigree (3,3,3,3,1)
- ethylene glycol: 0.00031 kg; lognormal variance with pedigree 0.0072, pedigree (3,3,3,5,1)
  properties: carbon content, fossil 0.387097, dry mass 1 kg, heating value, net 23.44 MJ, wet mass 1 kg
- ground granulated blast furnace slag: 0.142667 kg; lognormal variance with pedigree 0.0032, pedigree (3,3,1,1,1)
  properties: dry mass 1 kg, wet mass 1 kg
- gypsum, mineral: 0.022 kg; lognormal variance with pedigree 0.0032, pedigree (3,3,1,1,1)
  properties: dry mass 1 kg, wet mass 1 kg
- kraft paper: 0.00031 kg; lognormal variance with pedigree 0.0072, pedigree (3,3,3,5,1)
  properties: carbon content, fossil 0.0020219, carbon content, non-fossil 0.41662, dry mass 0.945 kg, heating value, net 14.11 MJ, water content 0.0582011, wet mass 1 kg
- steel, low-alloyed: 0.00011 kg; lognormal variance with pedigree 0.0126, pedigree (3,5,1,5,1)
  properties: carbon content, fossil 0.005, dry mass 1 kg, wet mass 1 kg

## Sampling procedure
The data is compiled based on different data sources, including sustainability reports, literature values and expert judgements. Most data is derived from sustainability reports of the three principal concrete producers of Colombia (Argos, Cemex and Holcim). The data is checked, completed and validated by local experts. In total, it is estimated that the data considered is representative for 81% of cement production in all the country (market share of the three main cement producers). Unit flows were calculated by dividing the amounts of inputs and outputs by the total clinker production in mass. The amount of the exchanges were calculated considering the arithmetic [weighted] average of the sample. No conversion to the geometric mean of the lognormal distribution was done, for consistency reasons with other Ecoinvent datasets.

## Extrapolations
The life cycle inventory model is based on the PCR for cement and concrete (Environdec, 2010), as well as on the LCA core model of the WBCSD-CSI EPD tool (Dauriat et al., 2014). Dauriat, A., Porté, C., Delerce, C., Guignard, C., & Adams, A. (2014). WBCSD CSI tool for EPDs of concrete and cement: LCA core model and database report. Environdec. (2010). Product category rules of UN CPC 3744 Cement.
