# magnesium-alloy production, AZ91, diecasting

Dataset: EcoSpold 2, unit process
Geography: RoW
Time period: 1998-01-01 to 2022-12-31
Technology level: current
Classification: EcoSpold01Categories: metals/extraction
Classification: ISIC rev.4 ecoinvent: 2420:Manufacture of basic precious and other non-ferrous metals
Tags: ConvertedDataset
Scenario: Business-as-Usual
System model: Substitution, consequential, long-term
Generated by: Niels Jungbluth
Published in: Althaus H.-J. 2000
Database: ecoinvent
isCopyrightProtected: true
accessRestrictedTo: 1

## General comment
Large uncertainties exist for data on energy use and SF6 emissions during magnesium diecasting. This inventory describes an assumption for the average production.
[This dataset was already contained in the ecoinvent database version 2. It was not individually updated during the transfer to ecoinvent version 3. Life Cycle Impact Assessment results may still have changed, as they are affected by changes in the supply chain, i.e. in other datasets. This dataset was generated following the ecoinvent quality guidelines for version 2. It may have been subject to central changes described in the ecoinvent version 3 change report (http://www.ecoinvent.org/database/ecoinvent-version-3/reports-of-changes/), and the results of the central updates were reviewed extensively. The changes added e.g. consistent water flows and other information throughout the database. The documentation of this dataset can be found in the ecoinvent reports of version 2, which are still available via the ecoinvent website. The change report linked above covers all central changes that were made during the conversion process.]

## Included activities end
Diecasting process, no extra infrastructure.

## Geography
Data for 1 producer

## Technology
Diecasting of AZ91, no recycling

## Time period
Environmental report

## Reference product
- magnesium-alloy, AZ91, diecast: 1 kg; By-product classification allocatable product; CPC 41601: Tungsten, molybdenum, tantalum, magnesium, cobalt, cadmium, titanium, zirconium, beryllium, gallium, hafnium, […]
  production volume 2.67763 kg
  properties: carbon allocation 0 kg, carbon content 0, carbon content, fossil 0, carbon content, non-fossil 0, dry mass 1 kg, price 17.4091 EUR2005, water content 0, water in wet mass 0 kg, wet mass 1 kg

## Inputs from technosphere
- electricity, medium voltage: 0.211562, 0.00791563, 0.100571, 1.74553, 0.146568, 0.00785594 kWh (6 suppliers, which the file names only by identifier); sum of these 2.22 kWh; lognormal variance with pedigree 0.042, pedigree (1,1,5,5,1)
- magnesium-alloy, AZ91: 1.67 kg; lognormal variance with pedigree 0.0127, pedigree (2,2,5,5,1)
  properties: dry mass 1 kg, wet mass 1 kg
- sulfur hexafluoride, liquid: 0.001 kg; lognormal variance with pedigree 0.0127, pedigree (2,2,5,5,1)
  properties: dry mass 1 kg, wet mass 1 kg

## Emissions to nature
- Sulfur hexafluoride [air, non-urban air or from high stacks]: 0.001 kg; lognormal variance with pedigree 0.0627, pedigree (2,2,5,5,1)

## Sampling procedure
Environmental data from an important producer

## Extrapolations
From 1 producer to average Europe This dataset has been copied from an original dataset covering the geography RER. The uncertainty has been adjusted accordingly.

## Review by Mischa Classen 2003-06-13
passed
