# magnesium factory construction

Dataset: EcoSpold 2, unit process
Geography: RoW
Time period: 1998-01-01 to 2022-12-31
Technology level: current
Classification: EcoSpold01Categories: metals/extraction
Classification: ISIC rev.4 ecoinvent: 4100:Construction of buildings
Tags: ConvertedDataset
Scenario: Business-as-Usual
System model: Substitution, consequential, long-term
Share of production covered: 30 %
Generated by: Niels Jungbluth
Published in: Althaus H.-J. 2000
Database: ecoinvent
isCopyrightProtected: true
accessRestrictedTo: 1

## General comment
Production plant for magnesium with an annual capacity of 100'000t and a life time of 50 years.
[This dataset was already contained in the ecoinvent database version 2. It was not individually updated during the transfer to ecoinvent version 3. Life Cycle Impact Assessment results may still have changed, as they are affected by changes in the supply chain, i.e. in other datasets. This dataset was generated following the ecoinvent quality guidelines for version 2. It may have been subject to central changes described in the ecoinvent version 3 change report (http://www.ecoinvent.org/database/ecoinvent-version-3/reports-of-changes/), and the results of the central updates were reviewed extensively. The changes added e.g. consistent water flows and other information throughout the database. The documentation of this dataset can be found in the ecoinvent reports of version 2, which are still available via the ecoinvent website. The change report linked above covers all central changes that were made during the conversion process.]

## Included activities end
Building infrastructure and land use, no machinery.

## Geography
Data for 1 producer

## Technology
Infrastructure (land use and buildings) for the production of magnesium not including equipment.

## Time period
Environmental report

## Reference product
- magnesium factory: 1 unit; By-product classification allocatable product; CPC 53269: Other constructions for manufacturing
  production volume 2.67763 unit
  properties: carbon allocation 0 kg, carbon content 0, price 6.99744e7 EUR2005

## Inputs from technosphere
- building, hall: 500000 m2; lognormal variance with pedigree 0.062, pedigree (4,4,5,5,1)

## Inputs from nature
- Occupation, industrial area [natural resource, land]: 5e7 m2*year; lognormal variance with pedigree 0.062, pedigree (4,4,5,5,1)
- Transformation, from unspecified [natural resource, land]: 1e6 m2; lognormal variance with pedigree 0.142, pedigree (4,4,5,5,1)
- Transformation, to industrial area [natural resource, land]: 1e6 m2; lognormal variance with pedigree 0.142, pedigree (4,4,5,5,1)

## Sampling procedure
Estimation with map.

## Extrapolations
From 1 producer to average Europe This dataset has been copied from an original dataset covering the geography RER. The uncertainty has been adjusted accordingly.

## Review by Mischa Classen 2003-06-13
passed
