# electricity production, high voltage, for Swiss Federal Railways

Dataset: EcoSpold 2, unit process
Geography: CH
Time period: 2011-01-01 to 2022-12-31
Technology level: current
Classification: EcoSpold01Categories: electricity/supply mix
Classification: ISIC rev.4 ecoinvent: 3510:Electric power generation, transmission and distribution
Synonyms: FFS; SBB; CFF
Scenario: Business-as-Usual
System model: Substitution, consequential, long-term
Generated by: Florentine Brunner
Published in: Itten R. 2012
Database: ecoinvent
isCopyrightProtected: true
accessRestrictedTo: 1

## General comment
This dataset represents the production of electricity at high voltage for the Swiss Federal Railways (SBB/CFF/FFS). The electricity mix used by the Swiss Railways for the year 2017 consists of 87.94 % hydropower, 10.76% nuclear power and 1.3 % new renewables.

## Included activities start
This activity starts from the different electricity producing technologies producing electricity at high voltage for the Swiss Federal Railways.

## Included activities end
This dataset includes shares of company owned production and purchased electricity from Swiss and French power plants and from the spot market.
This dataset doesn't include the share of 0.1% of electricity from photovoltaics.

## Geography
Data apply to self-owned power plants and electricity purchased by the Swiss Federal Railways.

## Technology
No technology description is provided because the dataset just describes the power plant portfolio of SBB using current average technology per energy carrier.

## Time period
Data for the year 2017 (latest consistent statistics available at the time of dataset creation).

## Reference product
- electricity, high voltage, for Swiss Federal Railways: 1 kWh; By-product classification allocatable product; CPC 17100: Electrical energy
  production volume 1.88415e9 kWh
  properties: carbon allocation 0 kg, carbon content 0, price 0.0977 EUR2005

## Inputs from technosphere
- electricity, high voltage: 0.000246, 0.012784, 0.013227, 0.082168, 0.394875, 0.423842, 0.01221, 0.060647 kWh (8 suppliers, which the file names only by identifier); sum of these 0.999999 kWh; lognormal variance with pedigree 0.0006, pedigree (1,1,3,1,1)

## Sampling procedure
Statistical data from SBB
