# heat pump production, for mini CHP plant

Dataset: EcoSpold 2, unit process
Geography: CH
Time period: 1997-01-01 to 2022-12-31
Technology level: current
Classification: EcoSpold01Categories: natural gas/cogeneration
Classification: ISIC rev.4 ecoinvent: 2815:Manufacture of ovens, furnaces and furnace burners
Tags: ConvertedDataset
Scenario: Business-as-Usual
System model: Substitution, consequential, long-term
Generated by: Thomas Heck
Published in: Heck, T. 2007
Database: ecoinvent
isCopyrightProtected: true
accessRestrictedTo: 1

## General comment
Inventory based on information from manufacturer (Ecopower 1997; Ecopower 2001). (Life time for operation assumed 80'000 h.)
[This dataset was already contained in the ecoinvent database version 2. It was not individually updated during the transfer to ecoinvent version 3. Life Cycle Impact Assessment results may still have changed, as they are affected by changes in the supply chain, i.e. in other datasets. This dataset was generated following the ecoinvent quality guidelines for version 2. It may have been subject to central changes described in the ecoinvent version 3 change report (http://www.ecoinvent.org/database/ecoinvent-version-3/reports-of-changes/), and the results of the central updates were reviewed extensively. The changes added e.g. consistent water flows and other information throughout the database. The documentation of this dataset can be found in the ecoinvent reports of version 2, which are still available via the ecoinvent website. The change report linked above covers all central changes that were made during the conversion process.]

## Included activities end
The module includes the most important materials used for production. It includes also the transport of these materials and the energy and water needed for production.

## Geography
Could be used for central European conditions.

## Technology
Specific manufacturer (Ecopower in Switzerland)

## Parameters
- fraction, process water, to air: 0.15 dimensionless; name fraction_PW_to_air; lognormal variance with pedigree 0.092025, pedigree (4,4,3,2,4)
  Literature value. In case when no industry/process specific data are available, default evaporation fraction value is used. This value is 15% and is based on literature (Statistics Canada, 2007 & Shaffer, K.H., 2008, Consumptive water use in the Great Lakes Basin, USGS & Shiklomanov, 2003, World Water Resources at the Beginning of the 21st Century) and has been approved by an expert.

## Reference product
- heat pump, for mini CHP plant: 1 unit; By-product classification allocatable product; CPC 43913: Refrigerating and freezing equipment and heat pumps, except household type equipment
  production volume 0.0336675 unit
  properties: carbon allocation 0 kg, carbon content 0, price 201 EUR2005

## Inputs from technosphere
- copper, cathode: 25 kg; lognormal variance with pedigree 0.148, pedigree (4,5,5,1,1)
  properties: dry mass 1 kg, wet mass 1 kg
- reinforcing steel: 12.5 kg; lognormal variance with pedigree 0.148, pedigree (4,5,5,1,1)
  properties: carbon content, fossil 0.004, dry mass 1 kg, wet mass 1 kg
- steel, low-alloyed, hot rolled: 12.5 kg; lognormal variance with pedigree 0.148, pedigree (4,5,5,1,1)
  properties: carbon content, fossil 0.005, dry mass 1 kg, wet mass 1 kg
- wastewater from pig iron production: -0.06 m3; lognormal variance with pedigree 0.3, pedigree (1,1,1,1,1)
  properties: carbon content, fossil 1.2149e-5, dry mass 0.337476 kg, water content 2962.17, wet mass 1000 kg

## Inputs from nature
- Water, unspecified natural origin [natural resource, in water]: 0.075 m3; lognormal variance with pedigree 0.3, pedigree (1,1,5,1,1)

## Emissions to nature
- Water [air, unspecified]: 0.01125 m3; lognormal variance with pedigree 0.0407, pedigree (2,2,5,1,1)
- Water [water, unspecified]: 0.00375 m3; lognormal variance with pedigree 0.0407, pedigree (2,2,5,1,1)

## Sampling procedure
Operator and manufacturer information

## Review by Gerald Rebitzer (obsolete) 2003-08-27
had passed
