# anchovy, capture by wooden purse seiner and landing whole, fresh

Dataset: EcoSpold 2, unit process
Geography: PE
Time period: 2010-01-01 to 2022-12-31
Technology level: current
Classification: ISIC rev.4 ecoinvent: 0311:Marine fishing
Scenario: Business-as-Usual
System model: Substitution, consequential, long-term
Generated by: Angel Avadí
Published in: Avadí, A. 2018
Database: ecoinvent
isCopyrightProtected: false
accessRestrictedTo: 1

## General comment
This activity represents capture and landing of Peruvian anchoveta by wooden purse seiners. The life cycle inventories were produced based on a large representative sample of Peruvian vessels and their activity. Detailed data from a sample of 10 vessels, plus dimensions, engine, landings and fuel data from >1000 vessels from 2005-2011, were extrapolated to characterise anchoveta landings by 689 Peruvian wooden purse seiners (some vessels went out of operation after 2011).
The whole Peruvian anchoveta (Engraulis ringens) fishery is the largest monospecific fishery in the world and supports the first national industry worldwide in terms of production and exportation of fishmeal and fish oil (mostly devoted to feeds for aquaculture and animal husbandry). The fleet consists of three segments, the most productive segment being the steel-hulled industrial fishing vessels (approximately 660 units). Catches by the steel fleet represent approximately 81 % of the total anchoveta catches. Additionally, almost 690 wooden semi-industrial vessels (nicknamed “Vikingas”) also target anchoveta for reduction and approximately 840 small- and medium-scale wooden vessels target mainly anchoveta, in principle for direct human consumption.
System boundaries and relation between activities

## Included activities start
From vessel use and maintenance phases, including all upstream activities

## Geography
Anchoveta (Engraulis ringens) is captured in the Peruvian EEZ.

## Technology
Current technology deployed in Peru includes purse seining and advanced fish detection equipment, including satellital data. Landing by pumping fish from floating platforms.

## Time period
Data corresponds to the landings-weighted average of annual opperation for 2005 and 2011.

## Parameters
- annual landings per vessel: 1.41615e6 kg; name landings_vessel_year; triangular min 712839, mostLikely 1.24766e6, max 2.28795e6, pedigree (2,1,1,1,1)
  Average annual landings per individual vessel
- light ship weight: 279000 kg; name Weight_vessel
  Weight of the vessel without any load or fishing tackle
- marine fuel use efficiency: 13.2 kg; name FUE; triangular min 10.6775, mostLikely 13.6838, max 15.2387, pedigree (2,1,1,1,1)
  Amount of marine fuel consumed per landed t of fish
- net calorific value: 42.7 MJ/kg; name net_cal_value; triangular min 41.6275, mostLikely 42.9346, max 43.5379, pedigree (3,5,3,5,5)
  Net calorific value of marine diesel oil (MDO)

## Reference product
- landed anchovy, fresh: 1 kg; By-product classification allocatable product; CPC 04261: Other wild pelagic fish, live, fresh or chilled
  production volume 9.88e8 kg
  properties: ash content 0.02 kg, carbon allocation 0.126173 kg, carbon content 0.481541, carbon content, non-fossil 0.481541, dry mass 0.26202 kg, energy content 7.9 MJ, fat content 0.088, price 0.539258 EUR2005, protein content 0.191, water content 2.81651, water in wet mass 0.73798 kg, wet mass 1 kg

## Inputs from technosphere
- antifouling paint emissions: -2e-5 kg; triangular min -2.24e-5, mostLikely -2e-5, max -1.76e-5, pedigree (3,3,1,1,1)
  properties: carbon content, fossil 0.21, carbon content, non-fossil 0.21, dry mass 1 kg, wet mass 1 kg
- diesel, burned in fishing vessel: 0.56364 MJ
- lubricating oil: 0.001 kg; triangular min 0.000535714, mostLikely 0.00107143, max 0.00139286, pedigree (1,1,2,1,1)
  properties: carbon content, fossil 0.75, dry mass 1 kg, heating value, net 40.2 MJ, wet mass 1 kg
- purse seiner maintenance, wood: 0.0065671 kg
- purse seiner, wood: 0.0065671 kg
  properties: lifetime 30 year, lifetime capacity [h] 48000 hour
- waste mineral oil: -0.001 kg
  properties: carbon content, fossil 0.75, dry mass 0.9 kg, heating value, net 34.7 MJ, water content 0.111111, wet mass 1 kg

## Inputs from nature
- Fish, pelagic, in ocean [natural resource, biotic]: 1.039 kg; triangular min 1.016, mostLikely 1.039, max 1.062, pedigree (2,1,2,1,1)

## Emissions to nature
- Discarded fish, pelagic, to ocean [water, ocean]: 0.039 kg

## Sampling procedure
Data for a large sample of vessels from various large companies (annonymous) and institutions monitoring landings and operations (IMARPE, PRODUCE) was collected. Fuel use was based on data from 316 vessels, while other inventory items were obtained from smaller samples ranging from ~20 to 135 vessels.
Data was scaled on the basis of light ship weight (LSW). Vessels were segregated into coherent segments based on LSW and LCIs compiled per segment. Ocasionally, multiple linear regressions were used to fill data gaps, based on known attributes of all vessels. Finally, landings-weighted averages were computed to characterise the average landed tonne.

## Extrapolations
Valid for PE and CL.
