# transport, passenger, electric scooter

Dataset: EcoSpold 2, unit process
Geography: GLO
Time period: 2000-01-01 to 2022-12-31
Technology level: modern
Classification: ISIC rev.4 ecoinvent: 4921:Urban and suburban passenger land transport
Tags: complementary product
Scenario: Business-as-Usual
System model: Substitution, consequential, long-term
Generated by: Andrea Del Duce
Published in: M. Leuenberger 2010
Database: ecoinvent
isCopyrightProtected: true
accessRestrictedTo: 1

## General comment
This dataset describes a journey of 1 km with an electric scooter. The dataset is parametrized with respect to mass of the vehicle, mass of the battery, consumption and lifetimes of vehicle and battery. The vehicle is described in terms of a vehicle without battery plus the battery. The amount of battery includes battery exchange due to maintenance. Currently, default values for a standard scooter with a weight without battery of about 90kg and a battery of 32kg are given. Assuming a life expectancy for the vehicle of 50000km and an average lifetime for the battery of 25000, it is expected that about every battery will require substitution. A default value of (50000km/25000km)*32 kg of batteries is taken into account including the maintenance. The construction of the datasets allows to change key parameters (like mass of the vehicle, mass of the battery, consumption, life times, etc.) in order to cover a wide spectrum of situations. However, it is important to consider that changing one parameter of a vehicle, e.g. its mass, may lead to changes in other parameters, e.g. the consumption. When modifying the default parameters given, attention should be payed to the possible influence which one parameter may have over the other.

## Included activities start
The dataset takes as input the scooter without battery, the battery, the materials and efforts needed for maintenance and the electric energy consumed for the journey. Both, the car and battery are considered as infrastructure even though they are expressed in kg.

## Included activities end
The datsets returns as by-products the non-exhaust emissions caused by brake, tyre and road wear.

## Technology
The dataset is based on averages over modern scooter technologies which are expected to be representative up to 2015.

## Parameters
- battery life: 25000 km; name battery_life
  Battery lifetime in km. Default value of 25000 assumed. Changing this value will alter the amount of battery considered in the maintenance.
- battery mass: 32 kg; name battery_mass
  Battery mass in kg. Default value of 32kg assumed. When changing this value it should be remembererd that varying the overall mass of the vehicle would also lead to a change in its consumption.
- emissions from brake friction: 4.45e-9 kg/kg vehicle; name brake_wear_emissions
  average (small, medium and large weight class) emissions produced per kg vehicle.
  Calculation of non-exhaust emissions (tyre, brake and road wear emissions as well as petrol evaporation emissions) are based on: Ntziachristos, L., Boulter, P. (2009). EMEP/EEA air pollutant emissions inventory guidebook 2009: Road vehicle tyre and brake wear; Road surface wear. Copenhagen, European Environment Agency
- emissions from road abrasion: 9.79167e-9 kg/kg vehicle; name road_wear_emissions
  emissions produced per kg vehicle
- emissions from tyre abrasion: 5.725e-8 kg/kg vehicle; name tyre_wear_emissions
  (same comment as for emissions from brake friction)
- scaling factor: 0.2 dimensionless
- vehicle consumption: 0.03 dimensionless; name vehicle_consumption
  Evaluated for the default set of parameters. For a different set of parameters, especially concerning the total mass of the vehicle, the consumption should be evaluated accordingly.
- vehicle life: 50000 km; name vehicle_life
  Default value of 50000km. Changing this value may influence the amount of battery resulting due to maintenance.
- vehicle mass without battery: 90.1 kg; name v_mass_without_battery
  Deafault value of 90.1kg. When changing this value it should be remembererd that varying the overall mass of the vehicle would also lead to a change in its consumption.

## Reference product
- transport, passenger, electric scooter: 1 km; By-product classification allocatable product; CPC 64119: Other land transportation services of passengers, n.e.c.
  production volume 1.165e10 km
  properties: carbon allocation 0 kg, carbon content 0, price 0.0885496 EUR2005

## Inputs from technosphere
- battery, Li-ion, LiMn2O4, rechargeable, prismatic: 0.00128 kg; lognormal variance with pedigree 0.0207, pedigree (2,2,3,5,3)
  properties: carbon content, fossil 0.328011, dry mass 1 kg, wet mass 1 kg
- brake wear emissions, passenger car: -1.08669e-7 kg; lognormal variance with pedigree 0.0038, pedigree (2,1,3,4,1)
- electric scooter, without battery: 0.001802 kg; lognormal variance with pedigree 0.0032, pedigree (2,3,5,4,2)
- electricity, low voltage: 0.03 kWh; lognormal variance with pedigree 0.0124, pedigree (2,3,5,4,3)
- maintenance, electric scooter, without battery: 2e-5 unit; lognormal variance with pedigree 0.0472, pedigree (3,4,5,4,4)
- road: 0.00010954 m*year; lognormal variance with pedigree 0.3902, pedigree (4,1,5,5,4)
- road wear emissions, passenger car: -1.19556e-6 kg; lognormal variance with pedigree 0.0038, pedigree (2,1,3,4,1)
- tyre wear emissions, passenger car: -6.99022e-6 kg; lognormal variance with pedigree 0.0038, pedigree (2,1,3,4,1)

## Sampling procedure
Based on modern, commercially available models.

## Extrapolations
The data is based on modern, commercially available models and is expected to be representative up to 2015. No substancial technological changes are expected for commercially available electric scooters up to 2015.

## Review by Christian Bauer 2012-09-14
passed

## Review by Emilia Moreno Ruiz 2013-07-30
Break wear emissions were edited according to the newest modelling.
