# tap water production, underground water without treatment

Dataset: EcoSpold 2, unit process
Geography: RoW
Time period: 2012-01-01 to 2022-12-31
Technology level: current
Classification: EcoSpold01Categories: water supply/production
Classification: ISIC rev.4 ecoinvent: 3600:Water collection, treatment and supply
Synonyms: potable water
Tags: single enterprise data
Scenario: Business-as-Usual
System model: Substitution, consequential, long-term
Generated by: Marylène Dussault
Database: ecoinvent
isCopyrightProtected: true
accessRestrictedTo: 1

## General comment
This dataset represents production of 1 kg of tap water under pressure at facility gate, ready for distribution in network. It represents average operation of tap water from underground water without further treatments. Water is pumped from aquifer and pressurized for distribution. Inventory was constructed from reported energy inputs and wastes from a single plant located in Québec assumed to represent 53% of total production of tap water from this technology.
[This dataset is meant to replace the following datasets:
- tap water production and supply, GLO, 2000 - 2000]

## Included activities start
From the intake pumping of raw surface water into the water treatment plant.

## Included activities end
This dataset ends with the production of tap water, at facility gate, under pressure. It includes energy for intake pumping, lighting and heating of the building as well as the energy of the pump pressurizing water to the beginning of the network. Infrastructure for the facility is estimated. It excludes energy for pumping stations and water losses within the network which is included in the tap water market. Emissions to the environment occurring during the treatment and during the distribution were not considered as they are assumed negligible. Main substance in water that would be released in the environment are assumed to be considered in wastewater processes.

## Geography
Extrapolated from data from a single plant in Quebec (Canada).The uncertainty was adjusted accordingly.

## Time period
Time of publication.

## Reference product
- tap water: 1 kg; By-product classification allocatable product; CPC 18000: Natural water
  production volume 8.4268e13 kg
  properties: carbon allocation 6.08566e-7 kg, carbon content 0.0017899, carbon content, fossil 0.0017899, carbon content, non-fossil 0, dry mass 0.00034 kg, price 0.000397 EUR2005, water content 2940.18, water in wet mass 0.99966 kg, wet mass 1 kg

## Inputs from technosphere
- diesel, burned in building machine: 1.49144e-5 MJ; lognormal variance with pedigree 0, pedigree (1,1,4,1,1)
  properties: density 0.84 kg/l, fuel input in physical units, L 4.11e-7 l, heating value, net 1 MJ
- electricity, medium voltage: 5.93853e-6, 5.87876e-7, 1.12851e-5, 6.74373e-6, 6.90202e-7, 0.000169224, 1.35797e-7, 6.4721e-7, 1.00591e-5, 7.59952e-7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 kWh (67 suppliers, which the file names only by identifier); sum of these 0.000399 kWh; lognormal variance with pedigree 0.0032, pedigree (2,4,4,1,1)
- pump station: 2.0568e-11 unit; lognormal variance with pedigree 0.045, pedigree (5,4,4,5,1)

## Inputs from nature
- Water, well, in ground [natural resource, in water]: 0.001 m3

## Sampling procedure
Based on data collected from a single pumping for distribution of underground water production facility in Quebec (Canada). See corresponding Quebec dataset for more information. Note that percent representativeness is not supplied because technology-specific global production volumes is too uncertain. Should this information become available, the representativeness can be calculated by dividing the sum of the water treated by the Quebec plants that served as a basis for the Global dataset by the technology-specific global production volume. (4.35E9 kg/a)

## Extrapolations
From a single pumping for distribution of underground water tap water production facility in Quebec (Canada) to global average of same technology. The uncertainty has been changed accordingly.
