# aluminium turning, primarily roughing, computer numerical controlled

Dataset: EcoSpold 2, unit process
Geography: RoW
Time period: 2006-01-01 to 2022-12-31
Technology level: current
Classification: ISIC rev.4 ecoinvent: 2592:Treatment and coating of metals; machining
Classification: EcoSpold01Categories: metals/chipping
Tags: ConvertedDataset
Scenario: Business-as-Usual
System model: Substitution, consequential, long-term
Share of production covered: 0 %
Generated by: Roland Steiner
Published in: Steiner, R. 2007
Database: ecoinvent
isCopyrightProtected: true
accessRestrictedTo: 1

## General comment
The reference for turning is 1 kg of metal removed. As there is a large variation from factory to factory with regard to the LCI, it is advised that in case this dataset becomes important in the results, it has to be investigated further if the rough estimations made are applicable or not. If you do not know how much has been removed by turning you can use 0.23kg of this process per kg of final product as an average assumption.
[This dataset was already contained in the ecoinvent database version 2. It was not individually updated during the transfer to ecoinvent version 3. Life Cycle Impact Assessment results may still have changed, as they are affected by changes in the supply chain, i.e. in other datasets. This dataset was generated following the ecoinvent quality guidelines for version 2. It may have been subject to central changes described in the ecoinvent version 3 change report (http://www.ecoinvent.org/database/ecoinvent-version-3/reports-of-changes/), and the results of the central updates were reviewed extensively. The changes added e.g. consistent water flows and other information throughout the database. The documentation of this dataset can be found in the ecoinvent reports of version 2, which are still available via the ecoinvent website. The change report linked above covers all central changes that were made during the conversion process.]

## Included activities end
This dataset encompasses the direct electricity consumption of the machine as well as compressed air and lubricant oil. Furthermore, the metal removed is included. Machine as well as factory infrastructure and operation are considered as well. The disposal of the lubricant oil is also included while the metal removed is assumed to be recycled. Degreasing is not included and has to be added if necessary.

## Geography
Geographical coverage encompasses the industrialised countries.

## Technology
Average technology

## Reference product
- aluminium removed by turning, primarily roughing, computer numerical controlled: 1 kg; By-product classification allocatable product; CPC 39363: Waste and scrap of aluminium
  production volume 2.67763 kg
  properties: carbon allocation 0 kg, carbon content 0, carbon content, fossil 0, carbon content, non-fossil 0, dry mass 1 kg, price 1.67757 EUR2005, water content 0, water in wet mass 0 kg, wet mass 1 kg

## Inputs from technosphere
- aluminium, cast alloy: 0.32 kg; lognormal variance with pedigree 0.002, pedigree (1,1,5,5,1)
  properties: dry mass 1 kg, wet mass 1 kg
- aluminium, wrought alloy: 0.68 kg; lognormal variance with pedigree 0.002, pedigree (1,1,5,5,1)
  properties: dry mass 1 kg, wet mass 1 kg
- compressed air, 700 kPa gauge: 1.28 m3; lognormal variance with pedigree 0.1008, pedigree (4,3,5,5,4)
- electricity, low voltage: 0.0155446, 0.00115574, 0.00459758, 0.0331462, 0.0308587, 0.276697 kWh (6 suppliers, which the file names only by identifier); sum of these 0.362 kWh; lognormal variance with pedigree 0.0208, pedigree (1,3,5,5,3)
- energy and auxilliary inputs, metal working factory: 4.41 kg; lognormal variance with pedigree 0.1008, pedigree (4,3,5,5,4)
- lubricating oil: 0.00382 kg; lognormal variance with pedigree 0.1008, pedigree (4,3,5,5,4)
  properties: carbon content, fossil 0.75, dry mass 1 kg, heating value, net 40.2 MJ, wet mass 1 kg
- metal working factory: 2.02e-9 unit; lognormal variance with pedigree 0.4008, pedigree (4,3,5,5,4)
- metal working machine, unspecified: 0.000174 kg; lognormal variance with pedigree 0.4008, pedigree (4,3,5,5,4)
- waste mineral oil: -0.00382 kg; lognormal variance with pedigree 0.1008, pedigree (4,3,2,5,4)
  properties: carbon content, fossil 0.864444, dry mass 0.9 kg, heating value, net 34.7 MJ, water content 0.111111, wet mass 1 kg

## Extrapolations
none This dataset has been copied from an original dataset covering the geography RER. The uncertainty has been adjusted accordingly.

## Review by Sébastien Humbert 2007-09-05
passed
none
