# machine operation, diesel, >= 74.57 kW, steady-state

Dataset: EcoSpold 2, unit process
Geography: GLO
Time period: 2014-01-01 to 2022-12-31
Technology level: current
Classification: ISIC rev.4 ecoinvent: 4312:Site preparation
Classification: EcoSpold01Categories: construction processes/machinery
Synonyms: construction - cement & mortar mixers; construction - tampers/rammers; industrial - other general industrial equip; light commercial - pressure washer; industrial - ac\refrigeration; construction - crushing/proc equip.; industrial - sweepers/srubbers; light commercial - pumps; construction - cranes; light commercial - gas compressors; light commercial - air compressors; other - oil field equip.; construction - signal boards/light plants; construction - plate compactors; construction - bore/drill rigs
Tags: template dataset
Scenario: Business-as-Usual
System model: Substitution, consequential, long-term
Generated by: Jean-Francois Menard
Published in: Kellenberger D. 2007
Database: ecoinvent
isCopyrightProtected: true
accessRestrictedTo: 1

## General comment
This dataset represents the operation of construction/industrial/light commercial machines (see list in Synonyms field). The U.S. EPA NONROAD2008 model for off-road machines has been used as basis for this dataset, it refers to engine power in units of horsepower (hp), the engine power range for the dataset is then >= 100 hp. The fuel consumption and emission factors from the model have been kept in the original units of kg/hp.hour for transparency reasons. However the engine power parameter used as input data for the dataset is quantified in the SI power unit of kilowatt (kW).
As cited in the U.S. EPA NONROAD2008 model documentation (Median Life, Annual Activity, and Load Factor Values for Nonroad engine Emissions Modeling, NR-005d, 47 pp, EPA-420-R-10-016, July 2010, http://www.epa.gov/oms/models/nonrdmdl/nonrdmdl2010/420r10016.pdf), "Each diesel nonroad equipment type was assigned one of three composite load factors (High load factor, Low load factor, or 7-cycle average, i.e. steady-state). To apply these load factors, we matched nonroad applications with the test cycle that most closely represents the nonroad activity for the application". The functional unit is 1 hour of operation.
The fuel consumption and basic emission factors are generated by the U.S. EPA NONROAD2008 model. Supplementary emissions are provided by the U.S. EPA NMIM model and copied directly from the ecoinvent v3.0 dataset "diesel burned in building machine, GLO 2001". The building machine infrastructure and lubricating oil input and waste output have been copied from the same ecoinvent dataset.
This dataset is a template dataset and has been parameterized for the machine power (in kW), emission standard (referred to as "tier" by the U.S EPA, the European equivalents would be the Stage I to IV standards published by the European Commission) and load factor to enable the creation of specific instances. To do so, the tier fraction (e.g. T0) and power (e.g. T0_kW), and the load factor parameters could be changed to reflect a specific situation/machine. The diesel fuel sulfur content (see Exchange Properties) could also be changed (the ultra-low sulfur nonroad diesel sulfur content of 0,0015% or 15 ppm, effective June 2010 in the United States of America is used as default).

## Included activities end
Includes the inputs " building machine" for infrastructure, lubricating oil and fuel consumption, and air emissions and waste oil as outputs.

## Geography
Fuel flow and most emission flows are extrapolated from US conditions, some emission flows and the other intermediate product flows (building machine, lubricating oil) are extrapolated from RER and CH conditions. The uncertainty has been adjusted accordingly.

## Technology
Average current technology for one typical machine representing the category.

## Parameters
- fraction tier T0: 0.0873061 dimensionless; name T0
  Calculated value. Represents the fraction of the US (lower 48 states) 2014 machine population of the type represented by this dataset (>= 74.57 kW, high load factor, see list in Synonyms field) for which the model year falls under the tier T0 emission standard (pre-1997 for machines < 130.50 kW, pre-1996 for machines < 559.27 kW and pre-2006 for machines >= 559.27 kW). Value calculated from the population data included in the NONROAD2008 model.
  Basic parameter used to define the machine population represented by the dataset, could be changed to create a new instance of the dataset to reflect a specific situation/machine.
- fraction tier T1: 0.0926987 dimensionless; name T1
  Calculated value. Represents the fraction of the US (lower 48 states) 2014 machine population of the type represented by this dataset (>= 74.57 kW, high load factor, see list in Synonyms field) for which the model year falls under the tier T1 emission standard (from 1997 to 2002 for machines < 130.50 kW, from 1996 to 2002 for machines < 223.71 kW, from 1996 to 2000 for machines < 447.42 kW, from 1996 to 2001 for machines < 559.27 kW, and from 2000 to 2005 for machines >= 559.27 kW). Value calculated from the population data included in the NONROAD2008 model.
  Basic parameter used to define the machine population represented by the dataset, could be changed to create a new instance of the dataset to reflect a specific situation/machine.
- fraction tier T2: 0.100596 dimensionless; name T2
  Calculated value. Represents the fraction of the US (lower 48 states) 2014 machine population of the type represented by this dataset (>= 74.57 kW, high load factor, see list in Synonyms field) for which the model year falls under the tier T2 emission standard (from 2003 to 2006 for machines < 130.50 kW, from 2003 to 2005 for machines < 223.71 kW, from 2001 to 2005 for machines < 447.42 kW, from 2002 to 2005 for machines < 559.27 kW, and from 2006 to 2010 for machines >= 559.27 kW). Value calculated from the population data included in the NONROAD2008 model.
  Basic parameter used to define the machine population represented by the dataset, could be changed to create a new instance of the dataset to reflect a specific situation/machine.
- fraction tier T3: 0.312933 dimensionless; name T3
  Calculated value. Represents the fraction of the US (lower 48 states) 2014 machine population of the type represented by this dataset (>= 74.57 kW, high load factor, see list in Synonyms field) for which the model year falls under the tier T3 emission standard (from 2007 to 2011 for machines < 130.50 kW, and from 2006 to 2010 for machines < 559.27 kW). Value calculated from the population data included in the NONROAD2008 model.
  Basic parameter used to define the machine population represented by the dataset, could be changed to create a new instance of the dataset to reflect a specific situation/machine.
- fraction tier T4: 0.144677 dimensionless; name T4
  Calculated value. Represents the fraction of the US (lower 48 states) 2014 machine population of the type represented by this dataset (>= 74.57 kW, high load factor, see list in Synonyms field) for which the model year falls under the tier T4 emission standard (from 2012 to 2013 for machines < 130.50 kW, from 2011 to 2013 for machines < 559.27 kW, and from 2011 to 2014 for machines >= 559.27 kW). Value calculated from the population data included in the NONROAD2008 model.
  Basic parameter used to define the machine population represented by the dataset, could be changed to create a new instance of the dataset to reflect a specific situation/machine.
- fraction tier T4N: 0.261789 dimensionless; name T4N
  Calculated value. Represents the fraction of the US (lower 48 states) 2014 machine population of the type represented by this dataset (>= 74.57 kW, high load factor, see list in Synonyms field) for which the model year falls under the tier T4N emission standard (from 2014 for machines < 559.27 kW, and from 2015 for machines >= 559.27 kW). Value calculated from the population data included in the NONROAD2008 model.
  Basic parameter used to define the machine population represented by the dataset, could be changed to create a new instance of the dataset to reflect a specific situation/machine.
- horsepower to kilowatt conversion factor: 0.7457 dimensionless; name hp_to_kW
  Literature value. Taken from http://en.wikipedia.org/wiki/Horsepower.
- load factor: 0.43 dimensionless; name load; lognormal variance with pedigree 0.0986, pedigree (4,5,5,5,4)
  Literature value. Represents the average fraction of the nominal engine power output used by the machine during its normal work cycle. Taken from the NONROAD2008 model.
  As cited in the U.S. EPA NONROAD2008 model documentation (Median Life, Annual Activity, and Load Factor Values for Nonroad engine Emissions Modeling, NR-005d, 47 pp, EPA-420-R-10-016, July 2010, http://www.epa.gov/oms/models/nonrdmdl/nonrdmdl2010/420r10016.pdf), "Each diesel nonroad equipment type was assigned one of three composite load factors (High load factor or 0.59, Low load factor or 0.21, or 7-cycle average, i.e. steady-state, or 0.43). To apply these load factors, we matched nonroad applications with the test cycle that most closely represents the nonroad activity for the application".
  Basic parameter used to define the machine population represented by the dataset, could be changed to create a new instance of the dataset to reflect a specific situation/machine.
- particulates <= 10 um emissions tier T0 for hp >= 100: 0.0004 kg/hp*h; name T0_PM10_100php; lognormal variance with pedigree 0.218, pedigree (4,5,5,5,4)
  Literature value. Taken from the NONROAD2008 model.
- particulates <= 10 um emissions tier T1 for hp < 175: 0.00028 kg/hp*h; name T1_PM10_175hp; lognormal variance with pedigree 0.218, pedigree (4,5,5,5,4)
  Literature value. Taken from the NONROAD2008 model.
- particulates <= 10 um emissions tier T1 for hp < 300: 0.00025 kg/hp*h; name T1_PM10_300hp; lognormal variance with pedigree 0.218, pedigree (4,5,5,5,4)
  Literature value. Taken from the NONROAD2008 model.
- particulates <= 10 um emissions tier T1 for hp < 600: 0.0002 kg/hp*h; name T1_PM10_600hp; lognormal variance with pedigree 0.218, pedigree (4,5,5,5,4)
  Literature value. Taken from the NONROAD2008 model.
- particulates <= 10 um emissions tier T1 for hp < 750: 0.00022 kg/hp*h; name T1_PM10_750hp; lognormal variance with pedigree 0.218, pedigree (4,5,5,5,4)
  Literature value. Taken from the NONROAD2008 model.
- particulates <= 10 um emissions tier T1 for hp >= 750: 0.00019 kg/hp*h; name T1_PM10_750php; lognormal variance with pedigree 0.218, pedigree (4,5,5,5,4)
  Literature value. Taken from the NONROAD2008 model.
- particulates <= 10 um emissions tier T2 for hp < 175: 0.00018 kg/hp*h; name T2_PM10_175hp; lognormal variance with pedigree 0.218, pedigree (4,5,5,5,4)
  Literature value. Taken from the NONROAD2008 model.
- particulates <= 10 um emissions tier T2 for hp >= 175: 0.00013 kg/hp*h; name T2_PM10_175php; lognormal variance with pedigree 0.218, pedigree (4,5,5,5,4)
  Literature value. Taken from the NONROAD2008 model.
- particulates <= 10 um emissions tier T3 for hp < 175: 0.00022 kg/hp*h; name T3_PM10_175hp; lognormal variance with pedigree 0.218, pedigree (4,5,5,5,4)
  Literature value. Taken from the NONROAD2008 model.
- particulates <= 10 um emissions tier T3 for hp < 750: 0.00015 kg/hp*h; name T3_PM10_750hp; lognormal variance with pedigree 0.218, pedigree (4,5,5,5,4)
  Literature value. Taken from the NONROAD2008 model.
- particulates <= 10 um emissions tier T4 for hp >= 750: 6.9e-5 kg/hp*h
- particulates <= 10 um emissions tier T4-T4N for hp < 750: 9.2e-6 kg/hp*h; name T44N_PM10_750hp; lognormal variance with pedigree 0.218, pedigree (4,5,5,5,4)
  Literature value. Taken from the NONROAD2008 model.
- particulates <= 10 um emissions tier T4N for hp >= 750: 2.76e-5 kg/hp*h; name T4N_PM10_750php; lognormal variance with pedigree 0.218, pedigree (4,5,5,5,4)
  Literature value. Taken from the NONROAD2008 model.
- power tier T0: 286.217 kW; name T0_kW; lognormal variance with pedigree 0.0986, pedigree (4,5,5,5,4)
  Calculated value. Represents the average engine nominal power of the US (lower 48 states) 2014 machine population of the type represented by this dataset (>= 74.57 kW, high load factor, see list in Synonyms field) for which the model year falls under the tier T0 emission standard ((pre-1997 for machines < 130.50 kW, pre-1996 for machines < 559.27 kW and pre-2006 for machines >= 559.27 kW). Value calculated from the population data included in the NONROAD2008 model. The NONROAD2008 data is given in the unit of horsepower, the "horsepower to kilowatt conversion factor" parameter was used to convert the result in kW, the SI unit of power.
  Basic parameter used to define the machine population represented by the dataset, could be changed to create a new instance of the dataset to reflect a specific situation/machine.
- power tier T1: 230.698 kW; name T1_kW; lognormal variance with pedigree 0.0986, pedigree (4,5,5,5,4)
  Calculated value. Represents the average engine nominal power of the US (lower 48 states) 2014 machine population of the type represented by this dataset (>= 74.57 kW, high load factor, see list in Synonyms field) for which the model year falls under the tier T4N emission standard (from 2014 for machines < 559.27 kW, and from 2015 for machines >= 559.27 kW). Value calculated from the population data included in the NONROAD2008 model. The NONROAD2008 data is given in the unit of horsepower, the "horsepower to kilowatt conversion factor" parameter was used to convert the result in kW, the SI unit of power.
  Basic parameter used to define the machine population represented by the dataset, could be changed to create a new instance of the dataset to reflect a specific situation/machine.
- power tier T2: 241.616 kW; name T2_kW; lognormal variance with pedigree 0.0986, pedigree (4,5,5,5,4)
  Calculated value. Represents the average engine nominal power of the US (lower 48 states) 2014 machine population of the type represented by this dataset (>= 74.57 kW, high load factor, see list in Synonyms field) for which the model year falls under the tier T4 emission standard (from 2012 to 2013 for machines < 130.50 kW, from 2011 to 2013 for machines < 559.27 kW, and from 2011 to 2014 for machines >= 559.27 kW). Value calculated from the population data included in the NONROAD2008 model. The NONROAD2008 data is given in the unit of horsepower, the "horsepower to kilowatt conversion factor" parameter was used to convert the result in kW, the SI unit of power.
  Basic parameter used to define the machine population represented by the dataset, could be changed to create a new instance of the dataset to reflect a specific situation/machine.
- power tier T3: 197.291 kW; name T3_kW; lognormal variance with pedigree 0.0986, pedigree (4,5,5,5,4)
  Calculated value. Represents the average engine nominal power of the US (lower 48 states) 2014 machine population of the type represented by this dataset (>=74.57 kW, high load factor, see list in Synonyms field) for which the model year falls under the tier T3 emission standard (from 2007 to 2011 for machines < 130.50 kW, and from 2006 to 2010 for machines < 559.27 kW). Value calculated from the population data included in the NONROAD2008 model. The NONROAD2008 data is given in the unit of horsepower, the "horsepower to kilowatt conversion factor" parameter was used to convert the result in kW, the SI unit of power.
  Basic parameter used to define the machine population represented by the dataset, could be changed to create a new instance of the dataset to reflect a specific situation/machine.
- power tier T4: 214.681 kW; name T4_kW; lognormal variance with pedigree 0.0986, pedigree (4,5,5,5,4)
  Calculated value. Represents the average engine nominal power of the US (lower 48 states) 2014 machine population of the type represented by this dataset (>=74.57 kW, high load factor, see list in Synonyms field) for which the model year falls under the tier T2 emission standard (from 2003 to 2006 for machines < 130.50 kW, from 2003 to 2005 for machines < 223.71 kW, from 2001 to 2005 for machines < 447.42 kW, from 2002 to 2005 for machines < 559.27 kW, and from 2006 to 2010 for machines >= 559.27 kW). ). Value calculated from the population data included in the NONROAD2008 model. The NONROAD2008 data is given in the unit of horsepower, the "horsepower to kilowatt conversion factor" parameter was used to convert the result in kW, the SI unit of power.
  Basic parameter used to define the machine population represented by the dataset, could be changed to create a new instance of the dataset to reflect a specific situation/machine.
- power tier T4N: 192.025 kW; name T4N_kW; lognormal variance with pedigree 0.0986, pedigree (4,5,5,5,4)
  Calculated value. Represents the average engine nominal power of the US (lower 48 states) 2014 machine population of the type represented by this dataset (>= 74.57 kW, high load factor, see list in Synonyms field) for which the model year falls under the tier T1 emission standard (from 1997 to 2002 for machines < 130.50 kW, from 1996 to 2002 for machines < 223.71 kW, from 1996 to 2000 for machines < 447.42 kW, from 1996 to 2001 for machines < 559.27 kW, and from 2000 to 2005 for machines >= 559.27 kW). Value calculated from the population data included in the NONROAD2008 model. The NONROAD2008 data is given in the unit of horsepower, the "horsepower to kilowatt conversion factor" parameter was used to convert the result in kW, the SI unit of power.
  Basic parameter used to define the machine population represented by the dataset, could be changed to create a new instance of the dataset to reflect a specific situation/machine.
- total hydrocarbon emissions: 0.0271523 kg; name THC; = (T0*T0_kW/hp_to_kW*T0_thc_100php+T1*T1_kW/hp_to_kW*if(T1_kW/hp_to_kW<175;T12_thc_175hp;if(T1_kW/hp_to_kW<300;T12_thc_300hp;if(T1_kW/hp_to_kW<600;T1_thc_600hp;if(T1_kW/hp_to_kW<750;T1_thc_750hp;T1_thc_750php))))+T2*T2_kW/hp_to_kW*if(T2_kW/hp_to_kW<175;T12_thc_175hp;if(T2_kW/hp_to_kW<300;T12_thc_300hp;T23_thc_300php))+T3*T3_kW/hp_to_kW*if(T3_kW/hp_to_kW<300;T3_thc_300hp;T23_thc_300php)+T4*T4_kW/hp_to_kW*if(T4_kW/hp_to_kW<750;T4_thc_750hp;T4_thc_750php)+T4N*T4N_kW/hp_to_kW*T4N_thc_100php)*load
  Calculated value. Represents the emissions per hour of operation of the US weigthed average machine represented by this dataset (>= 74.57 kW, steady-state, see list in Synonyms field).
- total hydrocarbon emissions tier T0 for hp >= 100: 0.00068 kg/hp*h; name T0_thc_100php; lognormal variance with pedigree 0.138, pedigree (4,5,5,5,4)
  Literature value. Taken from the NONROAD2008 model.
- total hydrocarbon emissions tier T1 for hp < 600: 0.0002 kg/hp*h; name T1_thc_600hp; lognormal variance with pedigree 0.138, pedigree (4,5,5,5,4)
  Literature value. Taken from the NONROAD2008 model.
- total hydrocarbon emissions tier T1 for hp < 750: 0.00015 kg/hp*h; name T1_thc_750hp; lognormal variance with pedigree 0.138, pedigree (4,5,5,5,4)
  Literature value. Taken from the NONROAD2008 model.
- total hydrocarbon emissions tier T1 for hp >= 750: 0.00029 kg/hp*h; name T1_thc_750php; lognormal variance with pedigree 0.138, pedigree (4,5,5,5,4)
  Literature value. Taken from the NONROAD2008 model.
- total hydrocarbon emissions tier T1-T2 for hp < 175: 0.00034 kg/hp*h; name T12_thc_175hp; lognormal variance with pedigree 0.138, pedigree (4,5,5,5,4)
  Literature value. Taken from the NONROAD2008 model.
- total hydrocarbon emissions tier T1-T2 for hp < 300: 0.00031 kg/hp*h; name T12_thc_300hp; lognormal variance with pedigree 0.138, pedigree (4,5,5,5,4)
  Literature value. Taken from the NONROAD2008 model.
- total hydrocarbon emissions tier T2-T3 for hp >= 300: 0.00017 kg/hp*h; name T23_thc_300php; lognormal variance with pedigree 0.138, pedigree (4,5,5,5,4)
  Literature value. Taken from the NONROAD2008 model.
- total hydrocarbon emissions tier T3 for hp < 300: 0.00018 kg/hp*h; name T3_thc_300hp; lognormal variance with pedigree 0.138, pedigree (4,5,5,5,4)
  Literature value. Taken from the NONROAD2008 model.
- total hydrocarbon emissions tier T4 for hp < 750: 0.00013 kg/hp*h; name T4_thc_750hp; lognormal variance with pedigree 0.138, pedigree (4,5,5,5,4)
  Literature value. Taken from the NONROAD2008 model.
- total hydrocarbon emissions tier T4 for hp >= 750: 0.00028 kg/hp*h; name T4_thc_750php; lognormal variance with pedigree 0.138, pedigree (4,5,5,5,4)
  Literature value. Taken from the NONROAD2008 model.
- total hydrocarbon emissions tier T4N for hp >= 100: 0.00013 kg/hp*h; name T4N_thc_100php; lognormal variance with pedigree 0.138, pedigree (4,5,5,5,4)
  Literature value. Taken from the NONROAD2008 model.
- total particulates <= 10 um emissions: 0.0158237 kg; name PM10; = (T0*T0_kW/hp_to_kW*T0_PM10_100php+T1*T1_kW/hp_to_kW*if(T1_kW/hp_to_kW<175;T1_PM10_175hp;if(T1_kW/hp_to_kW<300;T1_PM10_300hp;if(T1_kW/hp_to_kW<600;T1_PM10_600hp;if(T1_kW/hp_to_kW<750;T1_PM10_750hp;T1_PM10_750php))))+T2*T2_kW/hp_to_kW*if(T2_kW/hp_to_kW<175;T2_PM10_175hp;T2_PM10_175php)+T3*T3_kW/hp_to_kW*if(T3_kW/hp_to_kW<175;T3_PM10_175hp;T3_PM10_750hp)+T4*T4_kW/hp_to_kW*if(T4_kW/hp_to_kW<750;T44N_PM10_750hp;T4_PM10_750php)+T4N*T4N_kW/hp_to_kW*if(T4N_kW/hp_to_kW<750;T44N_PM10_750hp;T4N_PM10_750php))*load
  (same comment as for total hydrocarbon emissions)
- total volatile organic compound emissions: 0.0285913 kg; name VOC; = THC*VOC_to_THC
  (same comment as for total hydrocarbon emissions)
- volatile organic compound emissions ratio: 1.053 dimensionless; name VOC_to_THC; lognormal variance with pedigree 0.138, pedigree (4,5,5,5,4)
  Literature value. Taken from the NONROAD2008 model.

## Reference product
- machine operation, diesel, >= 74.57 kW, steady-state: 1 hour; By-product classification allocatable product; CPC 543: Site preparation services
  production volume 4 hour
  properties: carbon allocation 0 kg, carbon content 0, price 9.71711 EUR2005

## Inputs from technosphere
- building machine: 0.000117571 unit; lognormal variance with pedigree 0, pedigree (1,1,4,1,1)
  properties: consumption ratio 5.73e-6
- diesel: 20.5185 kg; lognormal variance with pedigree 0, pedigree (1,1,4,1,1)
  properties: carbon content, fossil 0.865, dry mass 1 kg, fuel consumption tier T0-T1-T2-T3-T4-T4N for hp >= 100 0.166471 kg/hp*h, heating value, net 42.8 MJ, sulfur content 1.5e-5, wet mass 1 kg
- lubricating oil: 0.372862, 0.0785448 kg (2 suppliers, which the file names only by identifier); sum of these 0.451407 kg; lognormal variance with pedigree 0, pedigree (1,1,4,1,1)
  properties: carbon content, fossil 0.75, consumption ratio 0.022, dry mass 1 kg, heating value, net 40.2 MJ, wet mass 1 kg
- waste mineral oil: -0.00306745, -0.324432, -0.123907 kg (3 suppliers, which the file names only by identifier); sum of these -0.451407 kg
  properties: carbon content, fossil 0.864444, dry mass 0.9 kg, heating value, net 34.7 MJ, water content 0.111111, wet mass 1 kg

## Inputs from nature
- Oxygen [natural resource, in air]: 47.5502 kg; lognormal variance with pedigree 0, pedigree (1,1,4,1,1)

## Emissions to nature
- 2,2,4-Trimethyl pentane [air, unspecified]: 2.05639e-5 kg; lognormal variance with pedigree 0, pedigree (1,1,4,1,1)
- Acenaphthene [air, unspecified]: 1.58237e-6 kg; lognormal variance with pedigree 0, pedigree (1,1,4,1,1)
- Acenaphthylene [air, unspecified]: 1.32919e-6 kg; lognormal variance with pedigree 0, pedigree (1,1,4,1,1)
- Acetaldehyde [air, unspecified]: 0.00151763 kg; lognormal variance with pedigree 0, pedigree (1,1,4,1,1)
- Acrolein [air, unspecified]: 8.66789e-5 kg; lognormal variance with pedigree 0, pedigree (1,1,4,1,1)
- Ammonia [air, unspecified]: 0.000532888 kg; lognormal variance with pedigree 0, pedigree (1,1,4,1,1)
- Anthracene [air, unspecified]: 6.8042e-9 kg; lognormal variance with pedigree 0, pedigree (1,1,4,1,1)
- Benz(a)anthracene [air, unspecified]: 1.12348e-8 kg; lognormal variance with pedigree 0, pedigree (1,1,4,1,1)
- Benzene [air, unspecified]: 0.000581662 kg; lognormal variance with pedigree 0, pedigree (1,1,4,1,1)
- Benzene, ethyl- [air, unspecified]: 8.8636e-5 kg; lognormal variance with pedigree 0, pedigree (1,1,4,1,1)
- Benzo(a)pyrene [air, unspecified]: 5.5383e-9 kg; lognormal variance with pedigree 0.3181, pedigree (1,5,4,3,1)
- Benzo(b)fluoranthene [air, unspecified]: 7.75362e-9 kg; lognormal variance with pedigree 0, pedigree (1,1,4,1,1)
- Benzo(ghi)perylene [air, unspecified]: 3.00651e-9 kg; lognormal variance with pedigree 0, pedigree (1,1,4,1,1)
- Benzo(k)fluoranthene [air, unspecified]: 5.5383e-9 kg; lognormal variance with pedigree 0, pedigree (1,1,4,1,1)
- Butadiene [air, unspecified]: 5.32256e-5 kg; lognormal variance with pedigree 0, pedigree (1,1,4,1,1)
- Cadmium II [air, unspecified]: 2.05185e-7 kg; lognormal variance with pedigree 0, pedigree (1,1,4,1,1)
- Carbon dioxide, fossil [air, unspecified]: 64.9374 kg; lognormal variance with pedigree 0, pedigree (1,1,4,1,1)
- Carbon monoxide, fossil [air, unspecified]: 0.0968165 kg; lognormal variance with pedigree 0, pedigree (1,1,4,1,1)
- Chromium III [air, unspecified]: 2.4194e-9 kg; lognormal variance with pedigree 0, pedigree (1,1,4,1,1)
- Chromium VI [air, unspecified]: 1.24636e-9 kg; lognormal variance with pedigree 0, pedigree (1,1,4,1,1)
- Chrysene [air, unspecified]: 3.00651e-8 kg; lognormal variance with pedigree 0, pedigree (1,1,4,1,1)
- Copper ion [air, unspecified]: 3.48814e-5 kg; lognormal variance with pedigree 0, pedigree (1,1,4,1,1)
- Dibenz(a,h)anthracene [air, unspecified]: 4.58888e-11 kg; lognormal variance with pedigree 0, pedigree (1,1,4,1,1)
- Dinitrogen monoxide [air, unspecified]: 0.00246222 kg; lognormal variance with pedigree 0, pedigree (1,1,4,1,1)
- Dioxins, measured as 2,3,7,8-tetrachlorodibenzo-p-dioxin [air, unspecified]: 1.2315e-11 kg; lognormal variance with pedigree 0, pedigree (1,1,4,1,1)
- Ethane [air, unspecified]: 2.71523e-5 kg; lognormal variance with pedigree 0, pedigree (1,1,4,1,1)
- Fluoranthene [air, unspecified]: 2.69003e-7 kg; lognormal variance with pedigree 0, pedigree (1,1,4,1,1)
- Fluorene [air, unspecified]: 1.58237e-6 kg; lognormal variance with pedigree 0, pedigree (1,1,4,1,1)
- Formaldehyde [air, unspecified]: 0.00337821 kg; lognormal variance with pedigree 0, pedigree (1,1,4,1,1)
- Hexane [air, unspecified]: 4.54974e-5 kg; lognormal variance with pedigree 0, pedigree (1,1,4,1,1)
- Indeno(1,2,3-cd)pyrene [air, unspecified]: 1.25007e-9 kg; lognormal variance with pedigree 0, pedigree (1,1,4,1,1)
- Manganese II [air, unspecified]: 1.67403e-7 kg; lognormal variance with pedigree 0, pedigree (1,1,4,1,1)
- Methane, fossil [air, unspecified]: 0.000434436 kg; lognormal variance with pedigree 0, pedigree (1,1,4,1,1)
- NMVOC, non-methane volatile organic compounds [air, unspecified]: 0.0217344 kg; lognormal variance with pedigree 0, pedigree (1,1,4,1,1)
- Naphthalene [air, unspecified]: 7.27891e-6 kg; lognormal variance with pedigree 0, pedigree (1,1,4,1,1)
- Nickel II [air, unspecified]: 2.48662e-7 kg; lognormal variance with pedigree 0, pedigree (1,1,4,1,1)
- Nitrogen oxides [air, unspecified]: 0.397709 kg; lognormal variance with pedigree 0, pedigree (1,1,4,1,1)
- Particulate Matter, < 2.5 um [air, unspecified]: 0.015349 kg; lognormal variance with pedigree 0, pedigree (1,1,4,1,1)
- Particulate Matter, > 10 um [air, unspecified]: 0.00100896 kg; lognormal variance with pedigree 0, pedigree (1,1,4,1,1)
- Particulate Matter, > 2.5 um and < 10um [air, unspecified]: 0.000474711 kg; lognormal variance with pedigree 0, pedigree (1,1,4,1,1)
- Phenanthrene [air, unspecified]: 4.11417e-6 kg; lognormal variance with pedigree 0, pedigree (1,1,4,1,1)
- Propanal [air, unspecified]: 0.000337378 kg; lognormal variance with pedigree 0, pedigree (1,1,4,1,1)
- Pyrene [air, unspecified]: 4.58888e-8 kg; lognormal variance with pedigree 0, pedigree (1,1,4,1,1)
- Selenium IV [air, unspecified]: 2.05185e-7 kg; lognormal variance with pedigree 0, pedigree (1,1,4,1,1)
- Styrene [air, unspecified]: 1.6997e-5 kg; lognormal variance with pedigree 0, pedigree (1,1,4,1,1)
- Sulfur dioxide [air, unspecified]: 0.000601198 kg; lognormal variance with pedigree 0, pedigree (1,1,4,1,1)
- Toluene [air, unspecified]: 0.000427926 kg; lognormal variance with pedigree 0, pedigree (1,1,4,1,1)
- Xylene [air, unspecified]: 0.000302553 kg; lognormal variance with pedigree 0, pedigree (1,1,4,1,1)
- Zinc II [air, unspecified]: 2.05185e-5 kg; lognormal variance with pedigree 0, pedigree (1,1,4,1,1)

## Sampling procedure
Most data from the U.S. EPA NONROAD2008 and NMIM models. Some data from the LCA study Oekoinventare von Energiesystemen 1996 and emissions from the Swiss "Offroad" database.

## Extrapolations
See geography
