# soybean meal and crude oil production

Dataset: EcoSpold 2, unit process
Geography: RER
Time period: 1998-01-01 to 2022-12-31
Technology level: current
Classification: ISIC rev.4 ecoinvent: 1040:Manufacture of vegetable and animal oils and fats
Classification: EcoSpold01Categories: chemicals/organics
Tags: ConvertedDataset
Scenario: Business-as-Usual
System model: Substitution, consequential, long-term
Generated by: Maggie Osses
Published in: Althaus H.-J. 2004
Database: ecoinvent
isCopyrightProtected: true
accessRestrictedTo: 1

## General comment
Dataset revised to ensure consistency with other local datasets. Emissions to air are considered as emanating in a high population density area. Emissions into water are assumed to be emitted into rivers. Inventory refers to 1 kg soya oil. Main literature sources are Reusser 1994, Cederberg 1998 and von Däniken et al. 1995.
[This dataset was already contained in the ecoinvent database version 2. It was not individually updated during the transfer to ecoinvent version 3. Life Cycle Impact Assessment results may still have changed, as they are affected by changes in the supply chain, i.e. in other datasets. This dataset was generated following the ecoinvent quality guidelines for version 2. It may have been subject to central changes described in the ecoinvent version 3 change report (http://www.ecoinvent.org/database/ecoinvent-version-3/reports-of-changes/), and the results of the central updates were reviewed extensively. The changes added e.g. consistent water flows and other information throughout the database. The documentation of this dataset can be found in the ecoinvent reports of version 2, which are still available via the ecoinvent website. The change report linked above covers all central changes that were made during the conversion process.]

## Included activities start
Manufacturing process starting with dry soja beans (basically imported from overseas), plus consumption of auxiliaries, energy, infrastructure and land use, as well as generation of emissions into air and water.

## Included activities end
The inventory includes the conditioning (but not the drying) of the beans previous extraction. It also includes the production of soya scrap. Generation and transportation of solid wastes are not included due to the lack of data. Transcient or unstable operations are not considered, but the production during stable operation conditions.

## Geography
Values from literature, some values provided by European manufcturing companies whose representativeness for the European soya oil industry is unknown

## Time period
Literature base on data mostly from the 1990s.

## Parameters
- fraction, cooling water, cooling pond system, to air: 0.032 dimensionless; name fraction_CW_CP_to_air; lognormal variance with pedigree 0.0413, pedigree (2,3,1,3,1)
  Calculated based on literature value (Scown, C.D., 2011, Water Footprint of U.S. Transportation Fuels and supplying information of the article) (Vionnet, S., Quantis Water Database - Technical Report, 2012).
- fraction, cooling water, once-through system, to air: 0.004 dimensionless; name fraction_CW_OT_to_air; lognormal variance with pedigree 0.0413, pedigree (2,3,1,3,1)
  (same comment as for fraction, cooling water, cooling pond system, to air)
- fraction, cooling water, recirculating system, to air: 0.771 dimensionless; name fraction_CW_R_to_air; lognormal variance with pedigree 0.0413, pedigree (2,3,1,3,1)
  (same comment as for fraction, cooling water, cooling pond system, to air)
- fraction, cooling water, to air: 0.3875 dimensionless; name fraction_CW_to_air; = (0.5*fraction_CW_OT_to_air)+(0.5*fraction_CW_R_to_air); lognormal variance with pedigree 0.092025, pedigree (4,4,3,2,4)
  Calculated value based on literature value (see comments of the other parametres present in this dataset) and expert opinion. In the case when no industry/literature data are available about the type of cooling or directly fraction, cooling water, to air specific for the process a default assumption is applied. It is assumed that the once-through cooling system is used in 50% of all cases and recirculating system is used in another 50% of all cases.
- fraction, process water, to air: 0.205 dimensionless; name fraction_PW_to_air; lognormal variance with pedigree 0.092025, pedigree (4,4,3,2,4)
  Literature value (Statistics Canada, 2007 & Shaffer, K.H., 2008, Consumptive water use in the Great Lakes Basin, USGS) (Vionnet, S., Quantis Water Database - Technical Report, 2012).
- fraction, tap water, to air: 0.205 dimensionless; name fraction_TW_to_air; = fraction_PW_to_air; lognormal variance with pedigree 0.092025, pedigree (4,4,3,2,4)
  Calculated value. See comment in the other parametres present in this dataset. Tap water is considered to be always used as process water, thus process water fractions to air are applied to all tap water input flows to calculate the amount of water consumed in the processes.

## Reference product
- soybean meal: 1 kg; By-product classification allocatable product; CPC 21920: Flours and meals of oil seeds or oleaginous fruits, except those of mustard
  production volume 1.97091e10 kg
  properties: carbon allocation 0.423308 kg, carbon content 0.475627, carbon content, fossil 0, carbon content, non-fossil 0.475627, dry mass 0.89 kg, price 0.528626 EUR2005, water content 0.123596, water in wet mass 0.11 kg, wet mass 1 kg

## Inputs from technosphere
- electricity, medium voltage: 0.056087 kWh; lognormal variance with pedigree 0.0301, pedigree (3,5,5,3,1)
- heat, district or industrial, natural gas: 0.472935 MJ; lognormal variance with pedigree 0.0321, pedigree (3,5,5,3,1)
  properties: heating value, net 1 MJ
- heat, district or industrial, other than natural gas: 0.256087 MJ; lognormal variance with pedigree 0.0321, pedigree (3,5,5,3,1)
  properties: heating value, net 1 MJ
- hexane: 0.000486957 kg
  properties: carbon content, fossil 0.837209, dry mass 1 kg, heating value, net 45.02 MJ, wet mass 1 kg
- oil mill: 2.19587e-10 unit
  properties: lifetime capacity [kg] 1.1e9 kg
- soybean: 1.21739 kg; lognormal variance with pedigree 0.0321, pedigree (3,5,5,3,1)
  properties: carbon content, non-fossil 0.524508, dry mass 0.89 kg, water content 0.123596, wet mass 1 kg
- soybean oil, crude: -0.217391 kg
  properties: carbon content, non-fossil 0.768, dry mass 1 kg, heating value, net 38.4 MJ, price 1.22147 EUR2005, wet mass 1 kg
- tap water: 0.617391 kg; lognormal variance with pedigree 1.21, pedigree (5,5,5,5,5)
  properties: carbon content, fossil 0.00178991, dry mass 0.000337476 kg, water content 2962.17, wet mass 1 kg

## Inputs from nature
- Water, cooling, unspecified natural origin [natural resource, in water]: 5.65663e-5 m3; lognormal variance with pedigree 1.21, pedigree (5,5,5,5,5)
- Water, unspecified natural origin [natural resource, in water]: 1.41416e-5 m3; lognormal variance with pedigree 1.21, pedigree (5,5,5,5,5)

## Emissions to nature
- Hexane [air, urban air close to ground]: 0.000486957 kg; lognormal variance with pedigree 0.1521, pedigree (3,5,5,3,1)
- Hydrochloric acid [air, urban air close to ground]: 6.52174e-5 kg; lognormal variance with pedigree 0.0721, pedigree (3,5,5,3,1)
- Water [air, unspecified]: 0.000151384 m3; lognormal variance with pedigree 0.092025, pedigree (4,4,5,2,4)
- BOD5, Biological Oxygen Demand [water, surface water]: 0.000130435 kg; lognormal variance with pedigree 0.0721, pedigree (3,5,5,3,1)
- COD, Chemical Oxygen Demand [water, surface water]: 0.000652174 kg; lognormal variance with pedigree 0.0721, pedigree (3,5,5,3,1)
- DOC, Dissolved Organic Carbon [water, surface water]: 0.000241546 kg; lognormal variance with pedigree 0.0721, pedigree (3,5,5,3,1)
- Dissolved solids [water, surface water]: 4.34783e-6 kg; lognormal variance with pedigree 0.0721, pedigree (3,5,5,3,1)
- Oils, non-fossil [water, surface water]: 0.000326087 kg
- TOC, Total Organic Carbon [water, surface water]: 0.000241546 kg; lognormal variance with pedigree 0.0721, pedigree (3,5,5,3,1)
- Water [water, unspecified]: 0.000536715 m3; lognormal variance with pedigree 0.092025, pedigree (4,4,5,2,4)

## Sampling procedure
Literature data

## Review by Heiko Kunst 2004-04-01
passed.
