# photovoltaic slanted-roof installation, 3kWp, single-Si, laminated, integrated, on roof

Dataset: EcoSpold 2, unit process
Geography: RoW
Time period: 2008-01-01 to 2022-12-31
Technology level: current
Classification: EcoSpold01Categories: photovoltaic/production of components
Classification: ISIC rev.4 ecoinvent: 3320:Installation of industrial machinery and equipment
Synonyms: monocrystalline; single crystalline
Tags: photovoltaic power; infrastructure
Scenario: Business-as-Usual
System model: Substitution, consequential, long-term
Generated by: [System]
Published in: Jungbluth N. 2012
Database: ecoinvent
isCopyrightProtected: true
accessRestrictedTo: 1

## General comment
This dataset represents a photovoltaic installation with a capacity of 3kWp and a lifetime of 30 years installed on an average location on the world. The installation consists out of the following infrastructure parts (represented by unit processes in the database):
- Laminate: single-Si (sc-Si)
- integrated slanted-roof mounting structure
- inverse rectifier
- 3kWp electric installation
All four main unit processes include the material uses, emissions process energies and dismantling per unit.

## Included activities start
This dataset starts from the purchase of the construction items needed for the mounting/installation of the 3kWp photovoltaic installation.

## Included activities end
This activity ends with the mounting of the photovoltaic installation.

This dataset includes all components for the installation of a 3kWp photovoltaic plant and the energy use for the mounting.

This dataset doesn't include dismantling as this is included in the infrastructure datasets.

## Geography
Average installation for a global dataset. This dataset has been copied from an original dataset covering the geography Switzerland (CH). The uncertainty has been adjusted accordingly.

## Technology
Current technology for mounting of panels or laminates, electric installations and other components. For technical details of the different installation components see in the particular infrastructure datasets. The construction process of integrated slanted-roof installations is the following way: The roof tiles are removed in the area foreseen for the solar laminates. Then steel profiles are screwed to the tile slats. Different aluminium profiles are used to make a frame for the laminate. A rubber is attached to these profiles. The laminates are placed within these frames and connected to the electric system. All edges are closed with rubber or silicones. Steel sheets are mounted at the gp between roof tiles and solar laminates.

## Time period
Calculation of amount of panels used based on efficiency data for 2005. Other data are adopted.

## Parameters
- Installed capacity: 5490 MW; name capacity_installed; lognormal variance with pedigree 0.0562, pedigree (4,2,1,3,3)
  Literature value. New installed grid-connected photovoltaic capacity in 2008
  IEA. 2009. Trends in Photovoltaic Applications:Survey report of selected IEA countries between 1992 and 2008. International Energy Agency (IEA), Report IEA-PVPS T1-18:2009, Paris Cedex (FR)
- Share 3kWp slanted-roof installation, single-Si, laminated, integrated, on roof: 0.0062 dimensionless; name pv_3sri_sSi_lir; lognormal variance with pedigree 0.1782, pedigree (4,5,2,5,5)
  Literature values, calculated value.
  Calculated from the shares of different types of cells in 2008 (European Photovoltaic Technology Platform 2012) and the shares of different types of mounting systems (Jungbluth et al. 2012). The latter shares are valid for Europe (RER) and do not take into account open ground PV plants. Due to lack of data for other regions or even countries on the world, the shares have been taken as calculation basis for all PV datasets. Uncertainty has been adjusted accordingly. The shares are taken to calculate all combinations of cell and mounting systems types at buildings. The final calculation then took into account the share of open ground plants, representing 35.2% of grid-connected installed capacity on the world (2008) (IEA-PVPS 2009).
  Data:
  Shares of different types of cells:
  - multi-Si: 47.7%
  - single-Si: 38.3%
  - CdTe: 6.4%
  - a-Si: 5.1%
  - ribbon-Si: 1.5%
  - CIS: 1.0%
  Shares of different types of mounting systems:
  - slanted-roof installation, panel, mounted, on roof: 65%
  - flat roof installation, on roof: 20%
  - facade installation, panel, mounted, at building: 10%
  - facade installation, laminated, integrated, at building: 2.5%
  - slanted-roof installation, laminated, integrated, on roof: 2.5%
  Sources:
  - European Photovoltaic Technology Platform. 2012. Photovoltaic Fact Sheets. The status of the PV industry (2008). LB-32-10-251-EN-D. retrieved from <http://www.eupvplatform.org/publications/misperceptions-fact-sheets.html#c2242> (accessed 31.01.2012)
  - Jungbluth N., Stucki M., Flury K., Frischknecht R. and Buesser S. (2012) Life Cycle Inventories of Photovoltaic Power Production. ESU-services Ltd., Uster, CH, retrieved from: www.esu-services.ch/data/public-lci-reports
  - IEA - PVPS 2009. Trends in photovoltaic applications. Survey report of selected IEA countries between 1992 and 2008. International Energy Agency (IEA) and Photovoltaic Power Systems Programme (PVPS). Report IEA-PVPS T1-18:2009
- capacity of the inverter: 2.5 kW; name capacity_inverter; lognormal variance with pedigree 0.008, pedigree (1,1,1,1,1)
  Measured value. Capacity of the inverter used for the 3kWp installations
- energy: aluminium-U-profile mounting: 0.02 kWh; name aluminium_profile; lognormal variance with pedigree 0.218, pedigree (5,5,5,5,5)
  Energy use for mounting of a 3kWp-slanted roof plant, aluminium-U-profile mounting [Schwarz U. and Keller M. 1992. ERZ und OPRZ einer 3kW-Photovoltaikanlage. Semesterarbeit ETH Zürich, Switzerland].
- energy: material lift: 0.04 kWh; name material_lift; lognormal variance with pedigree 0.218, pedigree (5,5,5,5,5)
  Energy use for mounting of a 3kWp-slanted roof plant, material lift [Wiest 1993. Phone call 13.04.1993. Schweizer Metallbau AG].
- energy: screws: 0.1 kWh; name screws; lognormal variance with pedigree 0.218, pedigree (5,5,5,5,5)
  Energy use for mounting of a 3kWp-slanted roof plant, screws [Schwarz U. and Keller M. 1992. ERZ und OPRZ einer 3kW-Photovoltaikanlage. Semesterarbeit ETH Zürich, Switzerland].
- energy: steel bracket mounting: 0.07 kWh; name steel_bracket; lognormal variance with pedigree 0.218, pedigree (5,5,5,5,5)
  Energy use for mounting of a 3kWp-slanted roof plant, steel bracket mounting [Schwarz U. and Keller M. 1992. ERZ und OPRZ einer 3kW-Photovoltaikanlage. Semesterarbeit ETH Zürich, Switzerland].
- lifetime: 30 year; lognormal variance with pedigree 0.026625, pedigree (4,3,3,2,3)
  Oral communication. Gnos, S. 2002. Personal Communication, 10.2002. NET AG, Switzerland
- lifetime of the electric installation: 30 year; name lifetime_electric_installation; lognormal variance with pedigree 0.026625, pedigree (4,3,3,2,3)
  Oral communication. Gnos, S. 2002. Personal Communication, 10.2002. NET AG, Switzerland
- lifetime of the inverter: 15 year; name lifetime_inverter; lognormal variance with pedigree 0.026625, pedigree (4,3,3,2,3)
  Estimation.

## Reference product
- photovoltaic slanted-roof installation, 3kWp, single-Si, laminated, integrated, on roof: 1 unit; By-product classification allocatable product; CPC 87360: Installation services of electrical machinery and apparatus n.e.c.
  production volume 11265.6 unit
  properties: capacity 3 kWp, carbon allocation 0 kg, carbon content 0, price 13570.9 EUR2005

## Inputs from technosphere
- electricity, low voltage: 0.0088044, 0.00320065, 0.000654604, 0.00260405, 0.0187738, 0.0174782, 0.15672, 0.0217643 kWh (8 suppliers, which the file names only by identifier); sum of these 0.23 kWh; lognormal variance with pedigree 0.018, pedigree (3,4,5,5,1)
- inverter, 2.5kW: 2.4 unit; lognormal variance with pedigree 0.0046, pedigree (2,4,5,5,1)
- photovoltaic laminate, single-Si wafer: 22.0719 m2; lognormal variance with pedigree 0.028, pedigree (3,4,5,5,1)
- photovoltaic module, building-integrated, for slanted-roof installation: 21.429 m2; lognormal variance with pedigree 0.024, pedigree (3,1,5,5,1)
- photovoltaics, electric installation for 3kWp module, at building: 1 unit; lognormal variance with pedigree 0.198, pedigree (3,4,5,5,1)

## Sampling procedure
Publication for efficiency, mounting systems and own estimations for other components.

## Extrapolations
Rough assumption for the decrease in material weights for mounting structures. This dataset has been copied from an original dataset covering the geography CH. The uncertainty has been adjusted accordingly.

## Review by Bo Weidema 2011-12-02
Dataset reviewed by two reviewers only.
