# mini CHP plant production, components for electricity only

Dataset: EcoSpold 2, unit process
Geography: RoW
Time period: 1997-01-01 to 2022-12-31
Technology level: current
Classification: ISIC rev.4 ecoinvent: 2710:Manufacture of electric motors, generators, transformers and electricity di
Classification: EcoSpold01Categories: natural gas/cogeneration
Tags: ConvertedDataset
Scenario: Business-as-Usual
System model: Substitution, consequential, long-term
Generated by: Thomas Heck
Published in: Heck, T. 2007
Database: ecoinvent
isCopyrightProtected: true
accessRestrictedTo: 1

## General comment
The module summarises infrastructure components of a cogeneration unit.
[This dataset was already contained in the ecoinvent database version 2. It was not individually updated during the transfer to ecoinvent version 3. Life Cycle Impact Assessment results may still have changed, as they are affected by changes in the supply chain, i.e. in other datasets. This dataset was generated following the ecoinvent quality guidelines for version 2. It may have been subject to central changes described in the ecoinvent version 3 change report (http://www.ecoinvent.org/database/ecoinvent-version-3/reports-of-changes/), and the results of the central updates were reviewed extensively. The changes added e.g. consistent water flows and other information throughout the database. The documentation of this dataset can be found in the ecoinvent reports of version 2, which are still available via the ecoinvent website. The change report linked above covers all central changes that were made during the conversion process.]

## Included activities end
The module includes all components related exclusively to electricity production.

## Geography
Could be used for central European conditions.

## Technology
Specific manufacturer (Ecopower in Switzerland)

## Reference product
- mini CHP plant, components for electricity only: 1 unit; By-product classification allocatable product; CPC 461: Electric motors, generators and transformers, and parts thereof
  production volume 3.96633 unit
  properties: carbon allocation 0 kg, carbon content 0, price 575.875 EUR2005

## Inputs from technosphere
- assembly of generator and motor, auxilliaries and energy use, for mini CHP plant: 1 unit; lognormal variance with pedigree 0.002, pedigree (1,1,5,5,1)
- electric parts, mini CHP plant: 1 unit; lognormal variance with pedigree 0.002, pedigree (1,1,5,5,1)
- generator, mini CHP plant: 1.25 unit; lognormal variance with pedigree 0.002, pedigree (1,1,5,5,1)

## Sampling procedure
Operator and manufacturer information

## Extrapolations
none This dataset has been copied from an original dataset covering the geography CH. The uncertainty has been adjusted accordingly.

## Review by Gerald Rebitzer (obsolete) 2003-07-03
passed
