# expanded clay production

Dataset: EcoSpold 2, unit process
Geography: RoW
Time period: 1995-01-01 to 2022-12-31
Technology level: current
Classification: EcoSpold01Categories: construction materials/additives
Classification: ISIC rev.4 ecoinvent: 2399:Manufacture of other non-metallic mineral products n.e.c.
Tags: ConvertedDataset
Scenario: Business-as-Usual
System model: Substitution, consequential, long-term
Generated by: Daniel Kellenberger (obsolete)
Published in: Kellenberger D. 2004
Database: ecoinvent
isCopyrightProtected: true
accessRestrictedTo: 1

## General comment
Expanded at 1’200 °C in a rotary furnace. Heavy fuel oil is used for heating. Bulk density of expanded clay: 260 - 500kg/m3
Expanded clay. Imagine source: http://www.thehydrosource.com/media/catalog/product/p/l/plantithydroton3.jpg

## Included activities end
includes the raw materials, the transport to the finishing plant and some internal transports, the energy carrier, some packaging materials, the infrastructure and the emissions

## Geography
For some exchanges CH, RER and GLO modules have been used as proxy.

## Technology
The mined clay is mixed with water, ground, sometimes granulated and burned at reverse flow in a rotary furnace at 1’200 °C. The included organic materials burn and the clay pellets expand with the help of heavy fuel oil. The surface melts and produces a sintered shell.

## Parameters
- fraction, process water, to air: 0.5 dimensionless; lognormal variance with pedigree 0.092025, pedigree (4,4,3,2,4)
- fraction, tap water, to air: 0.5 dimensionless; lognormal variance with pedigree 0.092025, pedigree (4,4,3,2,4)

## Reference product
- expanded clay: 1 kg; By-product classification allocatable product; CPC 37990: Non-metallic mineral products n.e.c. (including mineral wool, expanded mineral materials, worked mica, article[…]
  production volume 1.18255e9 kg
  properties: carbon allocation 0 kg, carbon content 0, carbon content, fossil 0, carbon content, non-fossil 0, dry mass 0.965 kg, price 0.38 EUR2005, water content 0.0362694, water in wet mass 0.035 kg, wet mass 1 kg

## Inputs from technosphere
- clay: 1.09983, 0.000168821 kg (2 suppliers, which the file names only by identifier); sum of these 1.1 kg; lognormal variance with pedigree 0.102, pedigree (3,5,5,5,1)
  properties: dry mass 0.965 kg, water content 0.0362694, wet mass 1 kg
- clay pit infrastructure: 2e-10 unit; lognormal variance with pedigree 0.652, pedigree (1,1,5,5,1)
- containerboard, linerboard: 5.20546e-5, 0.00194795 kg (2 suppliers, which the file names only by identifier); sum of these 0.002 kg; lognormal variance with pedigree 0.04, pedigree (4,5,5,5,1)
  properties: carbon content, fossil 0.00169774, carbon content, non-fossil 0.408159, dry mass 0.945 kg, heating value, net 15.92 MJ, water content 0.0582011, wet mass 1 kg
- diesel, burned in building machine: 0.0096136 MJ; lognormal variance with pedigree 0.04, pedigree (4,5,5,5,1)
  properties: heating value, net 1 MJ
- electricity, medium voltage: 7.50015e-6, 4.69402e-5, 1.03982e-5, 0.000141561, 2.52459e-5, 0.00045044, 7.10822e-5, 0.000105322, 0.0030133, 1.07444e-5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 kWh (46 suppliers, which the file names only by identifier); sum of these 0.035 kWh; lognormal variance with pedigree 0.102, pedigree (3,5,5,5,1)
- heat, district or industrial, other than natural gas: 0.000237252, 0.00538587, 3.08438 MJ (3 suppliers, which the file names only by identifier); sum of these 3.09 MJ; lognormal variance with pedigree 0.102, pedigree (3,5,5,5,1)
  properties: heating value, net 1 MJ
- packaging film, low density polyethylene: 0.0004813 kg; lognormal variance with pedigree 0.04, pedigree (4,5,5,5,1)
  properties: carbon content, fossil 0.857143, dry mass 1 kg, heating value, net 42.47 MJ, wet mass 1 kg
- tap water: 0.000602861, 0.000145291, 0.00021194, 0.00162406, 0.000323085, 0.0023404, 5.4339e-6, 0.00814693 kg (8 suppliers, which the file names only by identifier); sum of these 0.0134 kg; lognormal variance with pedigree 0.04, pedigree (4,5,5,5,1)
  properties: carbon content, fossil 0.00178991, dry mass 0.000337476 kg, water content 2962.17, wet mass 1 kg

## Emissions to nature
- Water [air, unspecified]: 6.7e-6 m3; lognormal variance with pedigree 0.0427, pedigree (2,2,5,5,1)
- Water [water, unspecified]: 6.7e-6 m3; lognormal variance with pedigree 0.0427, pedigree (2,2,5,5,1)

## Sampling procedure
Literature

## Extrapolations
See geography This dataset has been copied from an original dataset covering the geography DE. The uncertainty has been adjusted accordingly.

## Review by Roland Hischier 2009-01-28
passed
none
