# maintenance, stirling heat and power co-generation unit, 3kW electrical, wood pellet, future

Dataset: EcoSpold 2, unit process
Geography: RoW
Time period: 2000-01-01 to 2022-12-31
Technology level: current
Classification: ISIC rev.4 ecoinvent: 3314:Repair of electrical equipment
Classification: EcoSpold01Categories: biomass/cogeneration
Tags: ConvertedDataset
Scenario: Business-as-Usual
System model: Substitution, consequential, long-term
Generated by: Alex Primas
Published in: Primas A. 2007
Database: ecoinvent
isCopyrightProtected: true
accessRestrictedTo: 1

## General comment
The module reflects the maintenance for a Stirling cogeneration unit with 3 kW electrical output. Operation of the unit with wood pellets. Inventory based on estimations and information from one manufacturer. Maintenance is carried out every year or 5'300 h. Life time operation is 15 years or 80'000 h.
[This dataset was already contained in the ecoinvent database version 2. It was not individually updated during the transfer to ecoinvent version 3. Life Cycle Impact Assessment results may still have changed, as they are affected by changes in the supply chain, i.e. in other datasets. This dataset was generated following the ecoinvent quality guidelines for version 2. It may have been subject to central changes described in the ecoinvent version 3 change report (http://www.ecoinvent.org/database/ecoinvent-version-3/reports-of-changes/), and the results of the central updates were reviewed extensively. The changes added e.g. consistent water flows and other information throughout the database. The documentation of this dataset can be found in the ecoinvent reports of version 2, which are still available via the ecoinvent website. The change report linked above covers all central changes that were made during the conversion process.]

## Included activities end
The module includes an estimation for materials and transport used for the maintenance of the Stirling cogeneration unit

## Geography
Process applicable in central European conditions.

## Technology
Stirling motor for combustion of wood pellets. Power range: 1-3 kW electrical output, 4.5-10.5 kW heat output. Includes pellet storage volume for one day of operation. Electrical efficiency 23%, total efficiency 90%. Performance, lifetime and maintenance intervall according to expected future values for a serial product.

## Reference product
- maintenance, stirling heat and power co-generation unit, 3kW electrical, wood pellet, future: 1 unit; By-product classification allocatable product; CPC 87152: Maintenance and repair services of electrical machinery and apparatus n.e.c.
  production volume 3.96633 unit
  properties: carbon allocation 0 kg, carbon content 0, price 33.8196 EUR2005

## Inputs from technosphere
- ceramic tile: 0.5 kg; lognormal variance with pedigree 0.068, pedigree (4,5,5,5,1)
  properties: dry mass 1 kg, wet mass 1 kg
- inert waste, for final disposal: -0.525 kg; lognormal variance with pedigree 0.068, pedigree (4,5,5,5,1)
  properties: dry mass 0.995 kg, water content 0.00502513, wet mass 1 kg
- reinforcing steel: 3.5 kg; lognormal variance with pedigree 0.068, pedigree (4,5,5,5,1)
  properties: carbon content, fossil 0.004, dry mass 1 kg, wet mass 1 kg
- transport, passenger car: 200 km; lognormal variance with pedigree 0.188, pedigree (4,5,5,5,1)

## Sampling procedure
Literature data and manufacturer information

## Extrapolations
none This dataset has been copied from an original dataset covering the geography CH. The uncertainty has been adjusted accordingly.

## Review by Rolf Frischknecht 2007-08-13
passed
none
