# chemical factory construction, organics

Dataset: EcoSpold 2, unit process
Geography: RoW
Time period: 2000-01-01 to 2022-12-31
Technology level: current
Classification: ISIC rev.4 ecoinvent: 4290:Construction of other civil engineering projects
Classification: EcoSpold01Categories: chemicals/organics
Synonyms: Chemiewerk; chemical site; Chemiefabrik
Tags: ConvertedDataset
Scenario: Business-as-Usual
System model: Substitution, consequential, long-term
Generated by: Roland Hischier
Published in: Althaus H.-J. 2007
Database: ecoinvent
isCopyrightProtected: true
accessRestrictedTo: 1

## General comment
[This dataset was already contained in the ecoinvent database version 2. It was not individually updated during the transfer to ecoinvent version 3. Life Cycle Impact Assessment results may still have changed, as they are affected by changes in the supply chain, i.e. in other datasets. This dataset was generated following the ecoinvent quality guidelines for version 2. It may have been subject to central changes described in the ecoinvent version 3 change report (http://www.ecoinvent.org/database/ecoinvent-version-3/reports-of-changes/), and the results of the central updates were reviewed extensively. The changes added e.g. consistent water flows and other information throughout the database. The documentation of this dataset can be found in the ecoinvent reports of version 2, which are still available via the ecoinvent website. The change report linked above covers all central changes that were made during the conversion process.]

## Included activities end
This process includes land use, buildings and facilities (inkl. demanteling) of an average chemical plant.

## Geography
estimation, based on data from two german chemical plant sites

## Technology
Based on informations from two chemical plant sites in Germany and their respective pictures, estimations about occupation of area are made. The weight of the facilities is based on personal information from one of these sites and on literature.

## Time period
estimation, based on information from 2002

## Reference product
- chemical factory, organics: 1 unit; By-product classification allocatable product; CPC 53269: Other constructions for manufacturing
  production volume 2.67763 unit
  properties: carbon allocation 0 kg, carbon content 0, price 5.28046e8 EUR2005

## Inputs from technosphere
- building, hall, steel construction: 10500 m2; lognormal variance with pedigree 0.4406, pedigree (4,3,5,5,4)
- building, multi-storey: 158000 m3; lognormal variance with pedigree 0.4406, pedigree (4,3,5,5,4)
- chemical factory: 1.26e7 kg; lognormal variance with pedigree 0.4406, pedigree (4,3,5,5,4)
- decommissioned chemical production facilities: -1.26e7 kg; lognormal variance with pedigree 0.4406, pedigree (4,3,1,5,4)
  properties: carbon content, fossil 0.0169382, carbon content, non-fossil 5.78006e-6, dry mass 1 kg, wet mass 1 kg

## Inputs from nature
- Occupation, construction site [natural resource, land]: 84000 m2*year; lognormal variance with pedigree 0.1806, pedigree (4,3,5,5,4)
- Occupation, industrial area [natural resource, land]: 2.725e6 m2*year; lognormal variance with pedigree 0.1806, pedigree (4,3,5,5,4)
- Transformation, from unspecified [natural resource, land]: 54500 m2; lognormal variance with pedigree 0.2606, pedigree (4,3,5,5,4)
- Transformation, to industrial area [natural resource, land]: 54500 m2; lognormal variance with pedigree 0.2606, pedigree (4,3,5,5,4)

## Extrapolations
This dataset has been copied from an original dataset covering the geography RER. The uncertainty has been adjusted accordingly.

## Review by Heiko Kunst 2003-07-18
Passed.
