# heat production, natural gas, at diffusion absorption heat pump 4kW, future

Dataset: EcoSpold 2, unit process
Geography: CH
Time period: 2000-01-01 to 2022-12-31
Technology level: current
Classification: EcoSpold01Categories: heat pumps/heating systems
Classification: ISIC rev.4 ecoinvent: 3530:Steam and air conditioning supply
Synonyms: DAWP; DAHP
Tags: ConvertedDataset
Scenario: Business-as-Usual
System model: Substitution, consequential, long-term
Generated by: Alex Primas
Published in: Primas A. 2007
Database: ecoinvent
isCopyrightProtected: true
accessRestrictedTo: 1

## General comment
NOx and CO emissions derived from measurements of gas boilers operated with natural gas under controlled conditions; no adjustment to real operation of the heat pump system is made due to lack of information. Other emission approximised with data for gas boilers from different references.
[This dataset was already contained in the ecoinvent database version 2. It was not individually updated during the transfer to ecoinvent version 3. Life Cycle Impact Assessment results may still have changed, as they are affected by changes in the supply chain, i.e. in other datasets. This dataset was generated following the ecoinvent quality guidelines for version 2. It may have been subject to central changes described in the ecoinvent version 3 change report (http://www.ecoinvent.org/database/ecoinvent-version-3/reports-of-changes/), and the results of the central updates were reviewed extensively. The changes added e.g. consistent water flows and other information throughout the database. The documentation of this dataset can be found in the ecoinvent reports of version 2, which are still available via the ecoinvent website. The change report linked above covers all central changes that were made during the conversion process.]

## Included activities end
The module includes input natural gas input from low pressure gas network (CH), infrastructure (heat pump with peak boiler and borehole heat exchanger), emissions to air and water, and electricity needed for operation.

## Geography
Biogas input modelled for conditions in Switzerland. Process applicable in central European conditions.

## Technology
Diffusion absorption heat pump with 4 kWth nominal thermal power connected to a short borehole heat exchanger. The unit includes a peak load boiler which allows a maximal output power of 11 kWth. Operation with connection to low pressure gas network. Seasonal performance factor (SPF) of 1.32. Supply temperature of the heating system 50°C.

## Reference product
- heat, future: 1 MJ; By-product classification allocatable product; CPC 17300: Steam and hot water
  properties: Corresponding fuel use 0.690209 MJ, carbon allocation 0 kg, carbon content 0, heating value, net 1 MJ, price 0.0106 EUR2005

## Inputs from technosphere
- borehole heat exchanger, 150m: 6.41e-8 unit; lognormal variance with pedigree 0.330225, pedigree (4,4,5,2,1)
- electricity, low voltage: 0.0055556 kWh; lognormal variance with pedigree 0.106225, pedigree (4,5,5,2,4)
- heat pump, diffusion absorption, 4kW, future: 6.01e-7 unit; lognormal variance with pedigree 0.330225, pedigree (4,4,5,2,1)
- natural gas, low pressure: 0.019587 m3; lognormal variance with pedigree 0.014225, pedigree (3,4,5,2,1)
  properties: carbon content, fossil 0.695187, dry mass 1 kg, heating value, gross 39 MJ, heating value, net 36 MJ, wet mass 1 kg

## Inputs from nature
- Energy, geothermal, converted [natural resource, in ground]: 0.24242 MJ; lognormal variance with pedigree 0.0136941, pedigree (3,4,5,2,1)

## Emissions to nature
- Acetaldehyde [air, urban air close to ground]: 7.5758e-10 kg; lognormal variance with pedigree 1.08, pedigree (1,1,5,1,1)
- Acetic acid [air, urban air close to ground]: 1.1364e-7 kg; lognormal variance with pedigree 1.08, pedigree (1,1,5,1,1)
- Benzene [air, urban air close to ground]: 3.0303e-7 kg; lognormal variance with pedigree 1.08, pedigree (1,1,5,1,1)
- Benzo(a)pyrene [air, urban air close to ground]: 7.5758e-12 kg; lognormal variance with pedigree 1.08, pedigree (1,1,5,1,1)
- Butane [air, urban air close to ground]: 5.303e-7 kg; lognormal variance with pedigree 1.08, pedigree (1,1,5,1,1)
- Carbon dioxide, fossil [air, urban air close to ground]: 0.042424 kg; lognormal variance with pedigree 0, pedigree (1,1,5,1,1)
- Carbon monoxide, fossil [air, urban air close to ground]: 4.4697e-6 kg; lognormal variance with pedigree 1, pedigree (1,1,5,1,1)
- Dinitrogen monoxide [air, urban air close to ground]: 3.7879e-7 kg; lognormal variance with pedigree 1.08, pedigree (1,1,5,1,1)
- Dioxins, measured as 2,3,7,8-tetrachlorodibenzo-p-dioxin [air, urban air close to ground]: 2.2727e-17 kg; lognormal variance with pedigree 1.08, pedigree (1,1,5,1,1)
- Formaldehyde [air, urban air close to ground]: 7.5758e-8 kg; lognormal variance with pedigree 1.08, pedigree (1,1,5,1,1)
- Mercury II [air, urban air close to ground]: 2.2727e-11 kg; lognormal variance with pedigree 0.65, pedigree (1,1,5,1,1)
- Methane, fossil [air, urban air close to ground]: 1.5152e-6 kg; lognormal variance with pedigree 1.08, pedigree (1,1,5,1,1)
- Nitrogen oxides [air, urban air close to ground]: 7.5e-6 kg; lognormal variance with pedigree 0.41, pedigree (1,1,5,1,1)
- PAH, polycyclic aromatic hydrocarbons [air, urban air close to ground]: 7.5758e-9 kg; lognormal variance with pedigree 1.08, pedigree (1,1,5,1,1)
- Particulate Matter, < 2.5 um [air, urban air close to ground]: 7.5758e-8 kg; lognormal variance with pedigree 0.12, pedigree (1,1,5,1,1)
- Pentane [air, urban air close to ground]: 9.0909e-7 kg; lognormal variance with pedigree 1.08, pedigree (1,1,5,1,1)
- Propane [air, urban air close to ground]: 1.5152e-7 kg; lognormal variance with pedigree 1.08, pedigree (1,1,5,1,1)
- Propionic acid [air, urban air close to ground]: 1.5152e-8 kg; lognormal variance with pedigree 1.08, pedigree (1,1,5,1,1)
- Sulfur dioxide [air, urban air close to ground]: 3.7879e-7 kg; lognormal variance with pedigree 0, pedigree (1,1,5,1,1)
- Toluene [air, urban air close to ground]: 1.5152e-7 kg; lognormal variance with pedigree 1.08, pedigree (1,1,5,1,1)
- Nitrate [water, surface water]: 9.8485e-8 kg; lognormal variance with pedigree 0.3, pedigree (1,1,5,1,1)
- Nitrite [water, surface water]: 2.2727e-9 kg; lognormal variance with pedigree 0.3, pedigree (1,1,5,1,1)
- Sulfate [water, surface water]: 3.7879e-8 kg; lognormal variance with pedigree 0.3, pedigree (1,1,5,1,1)
- Sulfite [water, surface water]: 3.7879e-8 kg; lognormal variance with pedigree 0.3, pedigree (1,1,5,1,1)

## Sampling procedure
Literature data and manufacturer information, emissions from ecoinvent process natural gas, burned in boiler condensing modulating under 100kW

## Review by Rolf Frischknecht 2007-08-13
passed
none

## Review by Emilia Moreno Ruiz 2012-04-16
calculation of fuel use property.
