# heat and power co-generation, natural gas, 50kW electrical, lean burn

Dataset: EcoSpold 2, unit process
Geography: RoW
Time period: 2000-01-01 to 2022-12-31
Technology level: current
Classification: EcoSpold01Categories: natural gas/cogeneration
Classification: ISIC rev.4 ecoinvent: 3530:Steam and air conditioning supply
Tags: with true value
Scenario: Business-as-Usual
System model: Substitution, consequential, long-term
Generated by: [System]
Published in: Heck, T. 2007
Database: ecoinvent
isCopyrightProtected: true
accessRestrictedTo: 1

## General comment
The multioutput-process 'natural gas, burned in cogen 50kWe lean burn, allocation exergy' delivers the coproducts 'heat, at cogen 50kWe lean burn, allocation exergy' and 'electricity, at cogen 50kWe lean burn, allocation exergy'. The exergy allocation is the allocation scheme suggested to be used within ecoinvent (e.g. in electricity mixes).
[This dataset was already contained in the ecoinvent database version 2. It was not individually updated during the transfer to ecoinvent version 3. Life Cycle Impact Assessment results may still have changed, as they are affected by changes in the supply chain, i.e. in other datasets. This dataset was generated following the ecoinvent quality guidelines for version 2. It may have been subject to central changes described in the ecoinvent version 3 change report (http://www.ecoinvent.org/database/ecoinvent-version-3/reports-of-changes/), and the results of the central updates were reviewed extensively. The changes added e.g. consistent water flows and other information throughout the database. The documentation of this dataset can be found in the ecoinvent reports of version 2, which are still available via the ecoinvent website. The change report linked above covers all central changes that were made during the conversion process.]

## Included activities end
The module includes fuel input, infrastructure, emissions to air, and substances needed for operation.

## Geography
Emissions and efficiencies adjusted to Swiss emission regulation (LRV, Luftreinhalteverordnung) valid in year 2000.

## Technology
Average technology available on market.

## Parameters
- scaling factor: 1.85185 dimensionless

## Reference product
- heat, central or small-scale, natural gas: 1 MJ; By-product classification allocatable product; CPC 17300: Steam and hot water
  production volume 1.9149e10 MJ
  properties: Corresponding fuel use 1.68718 MJ, EcoSpold01Allocation_undefined_1 23, EcoSpold01Allocation_undefined_10 23, EcoSpold01Allocation_undefined_11 23, EcoSpold01Allocation_undefined_12 23, EcoSpold01Allocation_undefined_13 23, EcoSpold01Allocation_undefined_14 23, EcoSpold01Allocation_undefined_15 23, EcoSpold01Allocation_undefined_17 100, EcoSpold01Allocation_undefined_2 23, EcoSpold01Allocation_undefined_3 0, EcoSpold01Allocation_undefined_4 100, EcoSpold01Allocation_undefined_5 23, EcoSpold01Allocation_undefined_6 23, EcoSpold01Allocation_undefined_7 23, EcoSpold01Allocation_undefined_8 23, EcoSpold01Allocation_undefined_9 23, carbon allocation 0 kg, carbon content 0, exergy 0.163854 MJ, heating value, net 1 MJ, price 0.01 EUR2005, true value relation 0.163854

## Inputs from technosphere
- electricity, low voltage: -0.00662404, -0.000492495, -0.00195917, -0.0141246, -0.0131498, -0.117909 kWh (6 suppliers, which the file names only by identifier); sum of these -0.154259 kWh; lognormal variance with pedigree 0.21, pedigree (5,5,5,5,5)
  properties: EcoSpold01Allocation_undefined_1 77, EcoSpold01Allocation_undefined_10 77, EcoSpold01Allocation_undefined_11 77, EcoSpold01Allocation_undefined_12 77, EcoSpold01Allocation_undefined_13 77, EcoSpold01Allocation_undefined_14 77, EcoSpold01Allocation_undefined_15 77, EcoSpold01Allocation_undefined_16 100, EcoSpold01Allocation_undefined_2 77, EcoSpold01Allocation_undefined_3 100, EcoSpold01Allocation_undefined_5 77, EcoSpold01Allocation_undefined_6 77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
- heat and power co-generation unit, 50kW electrical, common components for heat+electricity: 3.09259e-8 unit; lognormal variance with pedigree 0.002, pedigree (1,1,5,5,1)
- heat and power co-generation unit, 50kW electrical, components for electricity only: 3.09259e-8 unit; lognormal variance with pedigree 0.002, pedigree (1,1,5,5,1)
- heat and power co-generation unit, 50kW electrical, components for heat only: 3.09259e-8 unit; lognormal variance with pedigree 0.002, pedigree (1,1,5,5,1)
- lubricating oil: 5.55556e-5 kg; lognormal variance with pedigree 0.012, pedigree (1,1,5,5,1)
  properties: carbon content, fossil 0.75, dry mass 1 kg, heating value, net 40.2 MJ, wet mass 1 kg
- natural gas, low pressure: 0.000696775, 0.00194032, 0.0297285, 0.00146291, 0.0136549 m3 (5 suppliers, which the file names only by identifier); sum of these 0.0474834 m3; lognormal variance with pedigree 0.002, pedigree (1,1,5,5,1)
  properties: carbon content, fossil 0.695187, dry mass 1 kg, heating value, gross 39 MJ, heating value, net 36 MJ, wet mass 1 kg
- waste mineral oil: -5.55556e-5 kg; lognormal variance with pedigree 0.122, pedigree (1,1,1,5,1)
  properties: carbon content, fossil 0.864444, dry mass 0.9 kg, heating value, net 34.7 MJ, water content 0.111111, wet mass 1 kg

## Emissions to nature
- Carbon dioxide, fossil [air, urban air close to ground]: 0.103704 kg; lognormal variance with pedigree 0.002, pedigree (1,1,5,5,1)
- Carbon monoxide, fossil [air, urban air close to ground]: 0.000296296 kg; lognormal variance with pedigree 0.032, pedigree (1,1,5,5,1)
- Dinitrogen monoxide [air, urban air close to ground]: 9.25926e-6 kg; lognormal variance with pedigree 0.302, pedigree (1,1,5,5,1)
- Methane, fossil [air, urban air close to ground]: 0.000148148 kg; lognormal variance with pedigree 0.482, pedigree (1,1,5,5,1)
- NMVOC, non-methane volatile organic compounds [air, urban air close to ground]: 1.85185e-5 kg; lognormal variance with pedigree 1.082, pedigree (1,1,5,5,1)
- Nitrogen oxides [air, urban air close to ground]: 0.00012963 kg; lognormal variance with pedigree 0.022, pedigree (1,1,5,5,1)
- Particulate Matter, < 2.5 um [air, urban air close to ground]: 2.77778e-7 kg; lognormal variance with pedigree 0.122, pedigree (1,1,5,5,1)
- Sulfur dioxide [air, urban air close to ground]: 1.01852e-6 kg; lognormal variance with pedigree 0.002, pedigree (1,1,5,5,1)

## Sampling procedure
Literature. Manufacturer information.

## Extrapolations
This dataset has been copied from a dataset valid for Switzerland. Uncertainty has been adjusted accordingly. The Annual Production volume is estimated to be only slightly higher than the one for Switzerland for market mix reasons. The Swiss Annual Production volume is valid for the year 2009. Uncertainty has been adjusted accordingly.
