# recultivation, ilmenite mine

Dataset: EcoSpold 2, unit process
Geography: GLO
Time period: 2000-01-01 to 2022-12-31
Technology level: current
Classification: ISIC rev.4 ecoinvent: 3900:Remediation activities and other waste management services
Classification: EcoSpold01Categories: construction materials/additives
Synonyms: Renaturierung
Scenario: Business-as-Usual
System model: Substitution, consequential, long-term
Generated by: Tereza Levova
Published in: Kellenberger D. 2007
Database: ecoinvent
isCopyrightProtected: true
accessRestrictedTo: 1

## General comment
Recultivation of limestone mine is used as a proxy for this dataset.The ratio of topsoil (assumed density: 1'400 kg/m3, thickness: 0.3 m, weight: 420 kg/m2, ) to extracted ilmenite is about 0.26%. The diesel fuel used for covering the closed mine is thus calculated using this ratio compared to its requirement during operation of the mine.

## Included activities end
includes only transformation from mineral extraction site to forest and the diesel consumption.

## Geography
data are only from one company in Switzerland (KFN)

## Reference product
- recultivation, ilmenite mine: 1 m2; By-product classification allocatable product; CPC 9441: Site remediation and clean-up services
  production volume 22138.2 m2
  properties: carbon allocation 0 kg, carbon content 0, price 0.139872 EUR2005

## Inputs from technosphere
- diesel, burned in building machine: 7.44 MJ; lognormal variance with pedigree 0.3706, pedigree (4,3,5,5,4)
  properties: heating value, net 1 MJ

## Inputs from nature
- Transformation, from mineral extraction site [natural resource, land]: 1 m2; lognormal variance with pedigree 0.1241, pedigree (3,2,5,5,1)
- Transformation, to forest, unspecified [natural resource, land]: 1 m2; lognormal variance with pedigree 0.1241, pedigree (3,2,5,5,1)

## Sampling procedure
survey

## Extrapolations
Based on data from Switzerland.

## Review by Bo Weidema 2012-05-18
This is a dataset extrapolated from another recultivation dataset. The original source is given. Would have been reasonable to maintain the original author as the data generator too.
