# energy saving, from ventilation system, 6 x 120 m3/h, polyethylene ducts

Dataset: EcoSpold 2, unit process
Geography: RoW
Time period: 2003-01-01 to 2022-12-31
Technology level: current
Classification: ISIC rev.4 ecoinvent: 4322:Plumbing, heat and air-conditioning installation
Classification: EcoSpold01Categories: ventilation/ventilation systems
Tags: ConvertedDataset
Scenario: Business-as-Usual
System model: Substitution, consequential, long-term
Generated by: Alex Primas
Published in: Hässig, W. 2007
Database: ecoinvent
isCopyrightProtected: true
accessRestrictedTo: 1

## General comment
The module reflects the impact of the ventilation system in relation to the benefit. It can be used for comparison with other systems for heat production. The date bases on a operation of the ventilation system of 12 month per year.
[This dataset was already contained in the ecoinvent database version 2. It was not individually updated during the transfer to ecoinvent version 3. Life Cycle Impact Assessment results may still have changed, as they are affected by changes in the supply chain, i.e. in other datasets. This dataset was generated following the ecoinvent quality guidelines for version 2. It may have been subject to central changes described in the ecoinvent version 3 change report (http://www.ecoinvent.org/database/ecoinvent-version-3/reports-of-changes/), and the results of the central updates were reviewed extensively. The changes added e.g. consistent water flows and other information throughout the database. The documentation of this dataset can be found in the ecoinvent reports of version 2, which are still available via the ecoinvent website. The change report linked above covers all central changes that were made during the conversion process.]

## Included activities end
Materials and energy used for ventilation of dwellings in relation to the heat demand reduction for a low energy building.

## Geography
Data representative for a low energy building in Zurich, Switzerland

## Technology
Reduction of 31.2 MJ/(m2 a) heat demand representative for a low energy building in Zurich and a room temperature of 20°C. Heat demand of the building without ventilation system 105 MJ/(m2 a) according to SIA 380/1. Electricity demand of ventilator (0.4 Wh/m3) representative for DC- or EC-motors and a system design with low pressure drops. Electricity demand of control unit 10 W. Additional 0.3 kWh/(m2 a) electricity demand for defrosting of heat exchanger. Electricity mix for Switzerland used. Ventilation system without ground heat exchanger and 6 decentral ventilation units with an air exchange rate of 120 m3/h each. Distribution of fresh- and exhaust-air within the flat with polyethylene tubes (75 mm diameter).

## Reference product
- energy saving: 1 MJ; By-product classification allocatable product; CPC 17100: Electrical energy
  production volume 1.28585e8 MJ
  properties: carbon allocation 0 kg, carbon content 0, price 0.0209639 EUR2005

## Inputs from technosphere
- ventilation of dwellings, decentralized, 6 x 120 m3/h: 0.03209 m2*year; lognormal variance with pedigree 0.0032, pedigree (2,3,5,5,1)

## Sampling procedure
Calculations, technical information and assumptions. Data valid for example building used.

## Extrapolations
none This dataset has been copied from an original dataset covering the geography CH. The uncertainty has been adjusted accordingly.

## Review by Rolf Frischknecht 2007-08-19
passed
none
