# clear-cutting, primary forest to arable land, perennial crop

Dataset: EcoSpold 2, unit process
Geography: BR-CE
Time period: 2014-01-01 to 2022-12-31
Technology level: current
Classification: ISIC rev.4 ecoinvent: 0161:Support activities for crop production
Tags: BRLUC
Scenario: Business-as-Usual
System model: Substitution, consequential, long-term
Generated by: Marilia Folegatti
Database: ecoinvent
isCopyrightProtected: true
accessRestrictedTo: 1

## General comment
This dataset represents the interventions associated with the clear-cutting of primary forest for the provision of arable land tenure, annual crop. NPP (net primary productivity of a given land, in kg C / m2 and year) and VEG (above-ground biomass, below-ground biomass and dead organic matter) values are parameterized.
VEG values and production volumes are derived from the Appendix S1 and S2 of Novaes et al. 2017. The most updated data is available in www.cnpma.embrapa.br/forms/BRLUC.php. In this reference, VEG values of primary forests and grassland were estimated based in Brazil, 2016 and croplands, pasture man made and forest intensive VEG values based in European Commission, 2010 and weighted according to climate categories occurrence per state. NPP values are reported by Haberl et al. (2007) and the average value for Latin America is adopted. The types of exchanges and their emission factors are the same from land transformations datasets 'clear-cutting, primary forest to arable land, annual crop, BR, 2010 - 2015' and 'land already in use, annual cropland to annual crop, BR, 2010 - 2015' available in Ecoinvent database (Rossi, 2017a,b), which in turn were retrieved from Andrea & Merlet (2001).
Bibliography is listed below:
- Andrea, M.O., Merlet, P. (2001). Emission of trace gases and aerosols from biomass burning. Global Biogeochemical Cycles. V 15, N4, p.955-966.
- Brazil (2016). Third National Communication of Brazil to the United Nations Framework Convention on Climate Change âEURO“ Volume III. Ministry of Science, Technology and Innovation, Brasília.
- European Commission (2010) Comission decision of 10 June 2010 on guidelines for the calculation of land carbon stocks for the purpose of Annex V to Directive 2009/28/EC. European Union, Brussels.
- Haberl H, Erb KH, Krausmann F, Gaube V, Bondeau A, Plutzar C, Gingrich S, Lucht W, Fischer-Kowalski M. 2007. Quantifying and mapping the human appropriation of net primary production in earth's terrestrial ecosystems. PNAS. v104 n31: 12942-12947.
- Jungbluth, N. et al. (2007) Life Cycle Inventories of Bioenergy. ecoinvent report No. 17. Dubendorf, CH: Swiss Centre for Life Cycle Inventories.
- Krausmann, F., Erb, K. H., Gingrich, S., Lauk, C., & Haberl, H. (2008). Global patterns of socioeconomic biomass flows in the year 2000: A comprehensive assessment of supply, consumption and constraints. Ecological Economics, 65(3), 471-487.
- Novaes RML, Pazianotto RA, Brandao M, Alves BJR, May A, Folegatti-Matsuura MIS. 2017. Estimating 20-year landuse change and derived CO2 emissions associated with crops, pasture and forestry in Brazil and each of its 27 states. Glob Change Biol. 23:3716âEURO“3728 .doi.org/10.1111/gcb.13708
- Rossi V, 2017a, clear-cutting, primary forest to arable land, annual crop, BR, Undefined, ecoinvent database version 3.3. Accessed in September, 2017
- Rossi V, 2017b, land already in use, annual cropland to annual crop, annual crop, BR, Undefined, ecoinvent database version 3.3. Accessed in September, 2017
[This dataset is meant to replace the following datasets:
- clear-cutting, primary forest to arable land, perennial crop, BR, 2010 - 2015]

## Included activities start
This activity starts with the natural state of primary forest.

## Included activities end
The dataset includes the carbon stored in Above-Ground Biomass (AGB), Below-Ground Biomass (BGB) and Dead Organic Matter (DOM) pools. It includes the fluxes from these carbon pools in terms of CO2 and other trace gases caused by the burning of biomass. It also includes a rough estimation for the machine use required for the clear-cutting, with emissions and ocupation exchanges based in an European model.
The loss/gain of Soil Organic Carbon (SOC) usually associated with a land tranformation is accounted for in the downstream activity using the arable land tenure, given that it depends on the subsequent land use practice.
This activity ends with the provision of arable land tenure, measured in unit kg carbon Potential Net Primary Production (NPP0).

## Parameters
- Above and below ground biomass: 0.436098 dimensionless; name VEG; lognormal variance with pedigree 0.0106, pedigree (3,1,1,1,3)
  This is the difference between biomass carbon stocks of previous and final land use vegetation (t0 - t1). This is derived from Novaes et al. 2017.
- LUC_crop_specific: 1 dimensionless
  This parameter allows to switch between a 'crop specific' and a 'country specific' approach when calculating the LUC of a crop. By default, the chosen approach is 'crop specific', so the value of the parameter is 1. If you want to apply a 'country specific' approach, turn the parameter to 0.
- NPP0, net primary productivity: 0.811 dimensionless; name NPP; lognormal variance with pedigree 0.022825, pedigree (2,5,2,2,3)
  This is net primary production and it is the average value for Latin America as reported by Haberl et al. (2007) .

## Reference product
- land tenure, arable land, measured as carbon net primary productivity, perennial crop: 1 kg; By-product classification allocatable product; CPC 7: Financial and related services; real estate services; and rental and leasing services
  production volume 2.53237e6 kg
  properties: carbon allocation 0 kg, carbon content 0, carbon content, non-fossil 0, dry mass 0 kg, price 0 EUR2005, water content 0, water in wet mass 0 kg, wet mass 0 kg

## Inputs from technosphere
- diesel, burned in building machine: 0.14392 MJ
  properties: heating value, net 1 MJ
- power sawing, without catalytic converter: 5.63372e-5 hour

## Inputs from nature
- Carbon, organic, in soil or biomass stock [natural resource, in ground]: 0.537728 kg
- Energy, gross calorific value, in biomass, primary forest [natural resource, biotic]: 21.5091 MJ
- Occupation, construction site [natural resource, land]: 0.0474248 m2*year
- Transformation, from forest, primary (non-use) [natural resource, land]: 1.23305 m2
- Transformation, to permanent crop [natural resource, land]: 1.23305 m2

## Emissions to nature
- Acetaldehyde [air, non-urban air or from high stacks]: 0.000284676 kg
- Acetic acid [air, non-urban air or from high stacks]: 0.000919722 kg
- Acetone [air, non-urban air or from high stacks]: 0.000271537 kg
- Acetonitrile [air, non-urban air or from high stacks]: 7.88333e-5 kg
- Ammonia [air, non-urban air or from high stacks]: 0.000569351 kg
- Benzene [air, non-urban air or from high stacks]: 0.000175185 kg
- Benzene, ethyl- [air, non-urban air or from high stacks]: 1.05111e-5 kg
- Carbon dioxide, from soil or biomass stock [air, non-urban air or from high stacks]: 1.80768 kg
- Carbon monoxide, from soil or biomass stock [air, non-urban air or from high stacks]: 0.0455481 kg
- Cyanide [air, non-urban air or from high stacks]: 0.00148907 kg
- Dinitrogen monoxide [air, non-urban air or from high stacks]: 8.75925e-5 kg
- Ethane [air, non-urban air or from high stacks]: 0.000525555 kg
- Ethanol [air, non-urban air or from high stacks]: 7.88333e-6 kg
- Ethylene [air, non-urban air or from high stacks]: 0.000854027 kg
- Ethyne [air, non-urban air or from high stacks]: 1.75185e-5 kg
- Formaldehyde [air, non-urban air or from high stacks]: 0.000613148 kg
- Formic acid [air, non-urban air or from high stacks]: 0.000481759 kg
- Furan [air, non-urban air or from high stacks]: 0.00210222 kg
- Isoprene [air, non-urban air or from high stacks]: 7.0074e-6 kg
- Methane, from soil or biomass stock [air, non-urban air or from high stacks]: 0.00297815 kg
- Methanol [air, non-urban air or from high stacks]: 0.000875925 kg
- Nitrogen oxides [air, non-urban air or from high stacks]: 0.00070074 kg
- PAH, polycyclic aromatic hydrocarbons [air, non-urban air or from high stacks]: 1.09491e-5 kg
- Particulate Matter, < 2.5 um [air, non-urban air or from high stacks]: 0.00398546 kg
- Particulate Matter, > 2.5 um and < 10um [air, non-urban air or from high stacks]: 0.00363509 kg
- Phenol [air, non-urban air or from high stacks]: 2.62778e-6 kg
- Propane [air, non-urban air or from high stacks]: 6.56944e-5 kg
- Propene [air, non-urban air or from high stacks]: 0.000240879 kg
- Sulfur dioxide [air, non-urban air or from high stacks]: 0.000249639 kg
- Terpenes [air, non-urban air or from high stacks]: 6.56944e-5 kg
- Toluene [air, non-urban air or from high stacks]: 0.000109491 kg
- Xylene [air, non-urban air or from high stacks]: 2.62778e-5 kg

## Sampling procedure
There was no sampling.

## Extrapolations
From the data of Novaes et al., 2017, the only extrapolation is the convertion of land transformation scenarios into production volumes and its uncertainty values. More details about this can be found in the PV_comment.

Exchanges emission factors are the same from land transformations datasets 'clear-cutting, primary forest to arable land, annual crop, BR, 2010 - 2015' (Rossi, 2017a) and 'land already in use, annual cropland to annual crop, BR, 2010 - 2015' (Rossi, 2017b), thus extrapolated from a national level to state level.
