# operation, computer, laptop, 23% active work

Dataset: EcoSpold 2, unit process
Geography: RoW
Time period: 2001-01-01 to 2022-12-31
Technology level: current
Classification: EcoSpold01Categories: electronics/services
Classification: ISIC rev.4 ecoinvent: 8219:Photocopying, document preparation and other specialized office support act
Synonyms: Notebook; Lifebook
Tags: Operation; ConvertedDataset
Scenario: Business-as-Usual
System model: Substitution, consequential, long-term
Generated by: Martin Lehmann
Published in: Hischier R. 2007
Database: ecoinvent
isCopyrightProtected: false
accessRestrictedTo: 1

## General comment
The laptop computer office use is calculated according to the share between active (5.5 hrs/day), standby (2 hrs/day) and off (16.5 hrs/day) modes taken from literature information.
[This dataset was already contained in the ecoinvent database version 2. It was not individually updated during the transfer to ecoinvent version 3. Life Cycle Impact Assessment results may still have changed, as they are affected by changes in the supply chain, i.e. in other datasets. This dataset was generated following the ecoinvent quality guidelines for version 2. It may have been subject to central changes described in the ecoinvent version 3 change report (http://www.ecoinvent.org/database/ecoinvent-version-3/reports-of-changes/), and the results of the central updates were reviewed extensively. The changes added e.g. consistent water flows and other information throughout the database. The documentation of this dataset can be found in the ecoinvent reports of version 2, which are still available via the ecoinvent website. The change report linked above covers all central changes that were made during the conversion process.]

## Included activities end
Describes the use of a laptop computer in an office. Calculated per 1 hour of laptop use in an office. UCTE production mix applied for electricity consumption (low voltage).

## Geography
The data is based on producer and literature information from Europe and the USA, combined with own assumptions for Europe.

## Technology
No technology involved, except for the production of the laptop computer, which is described in another dataset.

## Reference product
- operation, computer, laptop, 23% active work: 1 hour; By-product classification allocatable product; CPC 85: Support services
  production volume 2.65986 hour
  properties: carbon allocation 0 kg, carbon content 0, price 0.0251555 EUR2005

## Inputs from technosphere
- operation, computer, laptop, active mode: 0.22917 hour; lognormal variance with pedigree 0.032, pedigree (3,5,5,5,1)
- operation, computer, laptop, off mode: 0.6875 hour; lognormal variance with pedigree 0.032, pedigree (3,5,5,5,1)
- operation, computer, laptop, standby/sleep mode: 0.083333 hour; lognormal variance with pedigree 0.032, pedigree (3,5,5,5,1)

## Sampling procedure
Literature, producer information and own assumptions

## Extrapolations
see Geography and Technology This dataset has been copied from an original dataset covering the geography Europe without Switzerland. The uncertainty has been adjusted accordingly.
