# planning, heat and power co-generation unit, 160kW electrical

Dataset: EcoSpold 2, unit process
Geography: RoW
Time period: 1987-01-01 to 2022-12-31
Technology level: current
Classification: ISIC rev.4 ecoinvent: 7110:Architectural and engineering activities and related technical consultancy
Classification: EcoSpold01Categories: natural gas/cogeneration
Tags: ConvertedDataset
Scenario: Business-as-Usual
System model: Substitution, consequential, long-term
Generated by: Thomas Heck
Published in: Heck, T. 2007
Database: ecoinvent
isCopyrightProtected: true
accessRestrictedTo: 1

## General comment
Inventory refers to infrastructure of an existing natural gas cogeneration plant (lambda=1 motor, 160kWe, operation start 1987) at Jakobsberg, Basel, Switzerland.
[This dataset was already contained in the ecoinvent database version 2. It was not individually updated during the transfer to ecoinvent version 3. Life Cycle Impact Assessment results may still have changed, as they are affected by changes in the supply chain, i.e. in other datasets. This dataset was generated following the ecoinvent quality guidelines for version 2. It may have been subject to central changes described in the ecoinvent version 3 change report (http://www.ecoinvent.org/database/ecoinvent-version-3/reports-of-changes/), and the results of the central updates were reviewed extensively. The changes added e.g. consistent water flows and other information throughout the database. The documentation of this dataset can be found in the ecoinvent reports of version 2, which are still available via the ecoinvent website. The change report linked above covers all central changes that were made during the conversion process.]

## Included activities end
Includes energy needed.

## Geography
Data refers to a plant in Switzerland, assumed valid for Europe (RER)

## Technology
Component of a specific cogeneration unit installed in Switzerland. Technology at end of 1980s.

## Reference product
- planning, heat and power co-generation unit, 160kW electrical: 1 unit; By-product classification allocatable product; CPC 83: Professional, technical and business services (except research, development, legal and accounting services)
  production volume 2.67763 unit
  properties: carbon allocation 0 kg, carbon content 0, price 1365.28 EUR2005

## Inputs from technosphere
- electricity, low voltage: 300.587, 22.3485, 88.9036, 640.948, 596.715, 5350.5 kWh (6 suppliers, which the file names only by identifier); sum of these 7000 kWh; lognormal variance with pedigree 0.0866, pedigree (3,3,5,5,4)
- heat, district or industrial, other than natural gas: 101.346, 58038.7 MJ (2 suppliers, which the file names only by identifier); sum of these 58140 MJ; lognormal variance with pedigree 0.0866, pedigree (3,3,5,5,4)
  properties: heating value, net 1 MJ

## Sampling procedure
Operator and manufacturer information

## Extrapolations
see Geography/Text This dataset has been copied from an original dataset covering the geography RER. The uncertainty has been adjusted accordingly.

## Review by Gerald Rebitzer (obsolete) 2003-08-27
had passed
