# anodising, aluminium sheet

Dataset: EcoSpold 2, unit process
Geography: CA-QC
Time period: 1996-01-01 to 2022-12-31
Technology level: current
Classification: EcoSpold01Categories: metals/processing
Classification: ISIC rev.4 ecoinvent: 2592:Treatment and coating of metals; machining
Synonyms: Anodisieren
Tags: recontextualization
Scenario: Business-as-Usual
System model: Substitution, consequential, long-term
Generated by: Pascal Lesage
Published in: Althaus H.-J. 2004
Database: ecoinvent
isCopyrightProtected: true
accessRestrictedTo: 1

## General comment
Colourless anodising is inventoried. The coating thickness is 20 um.
[This dataset was already contained in the ecoinvent database version 2. It was not individually updated during the transfer to ecoinvent version 3. Life Cycle Impact Assessment results may still have changed, as they are affected by changes in the supply chain, i.e. in other datasets. This dataset was generated following the ecoinvent quality guidelines for version 2. It may have been subject to central changes described in the ecoinvent version 3 change report (http://www.ecoinvent.org/database/ecoinvent-version-3/reports-of-changes/), and the results of the central updates were reviewed extensively. The changes added e.g. consistent water flows and other information throughout the database. The documentation of this dataset can be found in the ecoinvent reports of version 2, which are still available via the ecoinvent website. The change report linked above covers all central changes that were made during the conversion process.]
Child dataset exchanges identical to GLO dataset. Created to enable linking to regional markets (e.g. for electricity). Data quality indicators adjusted accordingly.

## Included activities end
Mechanical surface treatment (50% of the workpieces), degreasing, pickling, anodising (20 um layer thickness) and sealing. Waste water treatment is included. Dying is not included.

## Geography
Swiss waste treatment assumed
Child dataset exchanges identical to GLO dataset. Created to enable linking to regional markets (e.g. for electricity). Data quality indicators adjusted accordingly.

## Technology
Porous anodising

## Parameters
- Quebec gross domestic product 2011: 3.11e11 USD(2011); name quebecGDP2011; lognormal variance with pedigree 0.0006, pedigree (1,1,1,1,1)
  Quebec Gross domestic product for 2011, expressed in 2011 USD. Source: Institut de la statistique du Québec. Converted from CAD to USD using a yearly average exchange rate of 0.989 CAD/USD (Source: bank of Canada).
- fraction, cooling water, cooling pond system, to air: 0 dimensionless
- fraction, cooling water, once-through system, to air: 0.004 dimensionless; name fraction_CW_OT_to_air; lognormal variance with pedigree 0.0413, pedigree (2,3,1,3,1)
  Calculated based on literature value (Scown, C.D., 2011, Water Footprint of U.S. Transportation Fuels and supplying information of the article) (Vionnet, S., Quantis Water Database - Technical Report, 2012).
- fraction, cooling water, recirculating system, to air: 0.771 dimensionless; name fraction_CW_R_to_air; lognormal variance with pedigree 0.0413, pedigree (2,3,1,3,1)
  (same comment as for fraction, cooling water, once-through system, to air)
- fraction, cooling water, to air: 0.3875 dimensionless; name fraction_CW_to_air; = (0.5*fraction_CW_OT_to_air)+(0.5*fraction_CW_R_to_air); lognormal variance with pedigree 0.092025, pedigree (4,4,3,2,4)
  Calculated value based on literature value (see comments of the other parametres present in this dataset) and expert opinion. In the case when no industry/literature data are available about the type of cooling or directly fraction, cooling water, to air specific for the process a default assumption is applied. It is assumed that the once-through cooling system is used in 50% of all cases and recirculating system is used in another 50% of all cases.
- fraction, water, decarbonised, to air: 0.3875 dimensionless; name fraction_WDC_to_air; = fraction_CW_to_air; lognormal variance with pedigree 0.092025, pedigree (4,4,3,2,4)
  Calculated value. See comments in the other parametres present in this dataset. Decarbonised water is considered to be always used as cooling water, thus cooling water fractions to air are applied to all carbonised water input flows to calculate the amount of water consumed in the processes.
- world gross domestic product 2011: 7e13 USD(2011); name worldGDP2011; lognormal variance with pedigree 0.0006, pedigree (1,1,1,1,1)
  World Gross domestic product for 2011, expressed in 2011 USD. Source: World Bank.

## Reference product
- anodising, aluminium sheet: 1 m2; By-product classification allocatable product; CPC 88731: Metal treatment and coating services
  production volume 5.16571e8 m2
  properties: carbon allocation 0 kg, carbon content 0, price 1.30622 EUR2005

## Inputs from technosphere
- aluminium sulfate, powder: 0.0141 kg; lognormal variance with pedigree 0.0028, pedigree (1,3,5,5,1)
  properties: dry mass 1 kg, wet mass 1 kg
- aluminium, wrought alloy: 0.00187 kg; lognormal variance with pedigree 0.0028, pedigree (1,3,5,5,1)
  properties: dry mass 1 kg, wet mass 1 kg
- chemical factory, organics: 4e-10 unit; lognormal variance with pedigree 0.68, pedigree (5,5,5,5,5)
- chemical, organic: 0.026 kg; lognormal variance with pedigree 0.0028, pedigree (1,3,5,5,1)
  properties: carbon content, fossil 0.628, dry mass 1 kg, heating value, net 19.03 MJ, wet mass 1 kg
- electricity, medium voltage: 4.84 kWh; lognormal variance with pedigree 0.0028, pedigree (1,3,5,5,1)
- ethoxylated alcohol (AE3): 0.003 kg; lognormal variance with pedigree 0.0028, pedigree (1,3,5,5,1)
  properties: carbon content, fossil 0.207952, carbon content, non-fossil 0.485221, dry mass 1 kg, heating value, net 21 MJ, wet mass 1 kg
- ethoxylated alcohol (AE7): 0.003 kg; lognormal variance with pedigree 0.0028, pedigree (1,3,5,5,1)
  properties: carbon content, fossil 0.321663, carbon content, non-fossil 0.321663, dry mass 1 kg, heating value, net 19.49 MJ, wet mass 1 kg
- hazardous waste, for incineration: -0.00125 kg; lognormal variance with pedigree 0.0028, pedigree (1,3,2,5,1)
  properties: carbon content, fossil 0.554667, dry mass 0.75 kg, heating value, net 17 MJ, water content 0.333333, wet mass 1 kg
- heat, district or industrial, other than natural gas: 7.84 MJ; lognormal variance with pedigree 0.0028, pedigree (1,3,5,5,1)
  properties: heating value, net 1 MJ
- lubricating oil: 0.0275 kg; lognormal variance with pedigree 0.0028, pedigree (1,3,5,5,1)
  properties: carbon content, fossil 0.75, dry mass 1 kg, heating value, net 40.2 MJ, wet mass 1 kg
- nitric acid, without water, in 50% solution state: 0.03 kg; lognormal variance with pedigree 0.0028, pedigree (1,3,5,5,1)
  properties: dry mass 1 kg, wet mass 1 kg
- polyethylene, low density, granulate: 0.001 kg; lognormal variance with pedigree 0.0028, pedigree (1,3,5,5,1)
  properties: carbon content, fossil 0.857143, dry mass 1 kg, heating value, net 42.47 MJ, wet mass 1 kg
- scrap aluminium: -0.015 kg; lognormal variance with pedigree 0.0028, pedigree (1,3,2,5,1)
  properties: dry mass 1 kg, wet mass 1 kg
- sodium chlorate, powder: 0.011 kg; lognormal variance with pedigree 0.0028, pedigree (1,3,5,5,1)
  properties: dry mass 1 kg, wet mass 1 kg
- sodium hydroxide, without water, in 50% solution state: 0.1217 kg; lognormal variance with pedigree 0.0028, pedigree (1,3,5,5,1)
  properties: dry mass 1 kg, heating value, net 3.03 MJ, wet mass 1 kg
- sulfuric acid: 0.146 kg; lognormal variance with pedigree 0.0028, pedigree (1,3,5,5,1)
  properties: dry mass 1 kg, wet mass 1 kg
- waste bitumen sheet: -0.0275 kg; lognormal variance with pedigree 0.0028, pedigree (1,3,2,5,1)
  properties: carbon content, fossil 0.643207, dry mass 0.985 kg, heating value, net 40.2 MJ, water content 0.0152284, wet mass 1 kg
- waste wood, untreated: -0.04 kg; lognormal variance with pedigree 0.0028, pedigree (1,3,2,5,1)
  properties: carbon content, non-fossil 0.48632, dry mass 0.8 kg, heating value, net 13.99 MJ, water content 0.25, wet mass 1 kg
- wastewater, unpolluted: -0.459375 m3; lognormal variance with pedigree 0.0028, pedigree (1,3,2,5,1)
  properties: carbon content, fossil 0.00178991, carbon content, non-fossil 0.00178991, dry mass 0.337476 kg, water content 2962.17, wet mass 1000 kg
- water, decarbonised: 750 kg; lognormal variance with pedigree 0.0028, pedigree (1,3,5,5,1)
  properties: wet mass 1 kg
- white spirit: 0.000125 kg; lognormal variance with pedigree 0.0028, pedigree (1,3,5,5,1)
  properties: carbon content, fossil 0.863404, dry mass 1 kg, heating value, net 45 MJ, wet mass 1 kg
- wood chips, dry, measured as dry mass: 0.029913 kg; lognormal variance with pedigree 0.0028, pedigree (1,3,5,5,1)
  properties: carbon content, non-fossil 0.494, dry mass 1 kg, heating value, net 9.99 MJ, water content 0.4, wet mass 1.4 kg

## Emissions to nature
- Particulate Matter, > 2.5 um and < 10um [air, unspecified]: 1.35e-5 kg; lognormal variance with pedigree 0.12, pedigree (1,3,5,5,1)
- Water [air, unspecified]: 0.290625 m3; lognormal variance with pedigree 0.043, pedigree (2,2,5,5,1)
- Aluminium III [water, unspecified]: 0.0015 kg; lognormal variance with pedigree 0.65, pedigree (1,3,5,5,1)
- Cadmium II [water, unspecified]: 7.5e-7 kg; lognormal variance with pedigree 0.65, pedigree (1,3,5,5,1)
- Chloride [water, unspecified]: 0.00666 kg; lognormal variance with pedigree 0.043, pedigree (1,3,5,5,1)
- Copper ion [water, unspecified]: 1.5e-5 kg; lognormal variance with pedigree 0.6528, pedigree (1,3,5,5,1)
- Iron ion [water, unspecified]: 2.25e-5 kg; lognormal variance with pedigree 0.65, pedigree (1,3,5,5,1)
- Lead II [water, unspecified]: 2e-5 kg; lognormal variance with pedigree 0.65, pedigree (1,3,5,5,1)
- Manganese II [water, unspecified]: 0.000128 kg; lognormal variance with pedigree 0.65, pedigree (1,3,5,5,1)
- Nickel II [water, unspecified]: 0.000218 kg; lognormal variance with pedigree 0.65, pedigree (1,3,5,5,1)
- Sodium I [water, unspecified]: 0.0433 kg; lognormal variance with pedigree 0.65, pedigree (1,3,5,5,1)
- Sulfate [water, unspecified]: 0.113 kg; lognormal variance with pedigree 0.043, pedigree (1,3,5,5,1)
- Tin ion [water, unspecified]: 0.000125 kg; lognormal variance with pedigree 0.6528, pedigree (1,3,5,5,1)
- Zinc II [water, unspecified]: 4.5e-5 kg; lognormal variance with pedigree 0.65, pedigree (1,3,5,5,1)

## Sampling procedure
Literature / survey

## Extrapolations
This dataset has been copied from an original dataset covering the geography RER. The uncertainty has been adjusted accordingly. Child dataset exchanges identical to GLO dataset. Created to enable linking to regional markets (e.g. for electricity). Data quality indicators adjusted accordingly.

## Review by Emilia Moreno Ruiz 2017-08-17
Water outputs were adjusted
