# railway track construction, for high-speed train

Dataset: EcoSpold 2, unit process
Geography: RoW
Time period: 2000-01-01 to 2022-12-31
Technology level: current
Classification: EcoSpold01Categories: transport systems/train
Classification: ISIC rev.4 ecoinvent: 4210:Construction of roads and railways
Scenario: Business-as-Usual
System model: Substitution, consequential, long-term
Generated by: Michael Spielmann (obsolete)
Published in: Spielmann M. 2004
Database: ecoinvent
isCopyrightProtected: true
accessRestrictedTo: 1

## General comment
Based on 'railway track construction, for high-speed train, DE 2000'. All data is referred to meter*year. Life time of the rail track infrastructure is assumed to be 100 yrs. Expenditures due to tunnel construction and bridge construction have been taken into account, according to the share of tunnels and bridges: trenched tunnels: 15%; mined tunnels: 23%; rail glen bridges: 8%; railroad bridges: 1% of the total track length. All data is referred to a two way track. Allocation between goods and passenger transport is not yet applied. Maintenance and land use and disposel is included. For the maintenance and land use data, the inventory is for a ballastless track bedding.

## Included activities start
Service starts with the material consumption due to the track bedding, substructure and catenary system.

## Included activities end
The inventory includes the construction of a ballastless rail track (track bedding, substructures, catenary system) as well as the construction of tunnels and bridges. Further components of rail track infrastructure, such as signalling infrastructure, train overtaking stations, sound insulation walls and buildings (stations, service garages) are not included in this study. Maintenance and land use is considered, as well as the end-of-life of railway track is included. For the maintenance and land use data, the inventory includes the energy consumption required for the operation of the rail track as well as the operation of tunnels. The use and emissions to soil of herbicides (weed control) and lubricates (point maintenance) are taken into account. Also land transformation and occupation are accounted for.

## Geography
Data refers to specific ICE railway track.

## Technology
Data represents new technologies

## Reference product
- railway track, for high-speed train: 1 m*year; By-product classification allocatable product; CPC 53212: Railways
  production volume 3.75794 m*year
  properties: carbon allocation 0 kg, carbon content 0, price 28.356 EUR2005

## Inputs from technosphere
- aluminium, wrought alloy: 0.125 kg; lognormal variance with pedigree 0.1446, pedigree (3,3,5,5,3)
  properties: dry mass 1 kg, wet mass 1 kg
- ceramic tile: 0.12 kg; lognormal variance with pedigree 0.1446, pedigree (3,3,5,5,3)
  properties: dry mass 1 kg, wet mass 1 kg
- concrete, medium strength: 0.0419 m3; lognormal variance with pedigree 0.0226, pedigree (3,3,5,5,3)
  properties: dry mass 2190 kg, water content 0.086758, wet mass 2380 kg
- copper, cathode: 0.424 kg; lognormal variance with pedigree 0.0246, pedigree (3,3,5,5,3)
  properties: dry mass 1 kg, wet mass 1 kg
- diesel, burned in building machine: 0.05 MJ; lognormal variance with pedigree 0.1446, pedigree (3,3,5,5,3)
  properties: heating value, net 1 MJ
- electricity, medium voltage: 0.00138431, 0.00866383, 0.00191921, 0.026128, 0.00465968, 0.0831384, 0.0131197, 0.0194394, 0.556169, 0.00198311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 kWh (46 suppliers, which the file names only by identifier); sum of these 6.46 kWh; lognormal variance with pedigree 0.012, pedigree (1,1,5,5,1)
- excavation, skid-steer loader: 1.89 m3; lognormal variance with pedigree 0.1446, pedigree (3,3,5,5,3)
- glyphosate: 0.0007 kg; lognormal variance with pedigree 0.122, pedigree (1,1,5,5,1)
  properties: carbon content, fossil 0.214286, dry mass 1 kg, wet mass 1 kg
- inert waste, for final disposal: -0.0184989, -2.8415 kg (2 suppliers, which the file names only by identifier); sum of these -2.86 kg; lognormal variance with pedigree 0.0166, pedigree (3,3,3,5,1)
  properties: dry mass 0.995 kg, water content 0.00502513, wet mass 1 kg
- lubricating oil: 0.00753 kg; lognormal variance with pedigree 0.042, pedigree (1,1,5,5,1)
  properties: carbon content, fossil 0.75, dry mass 1 kg, heating value, net 40.2 MJ, wet mass 1 kg
- pig iron: 0.74 kg; lognormal variance with pedigree 0.1446, pedigree (3,3,5,5,3)
  properties: carbon content, fossil 0.045, dry mass 1 kg, wet mass 1 kg
- reinforcing steel: 10.6 kg; lognormal variance with pedigree 0.0226, pedigree (3,3,5,5,3)
  properties: carbon content, fossil 0.004, dry mass 1 kg, wet mass 1 kg
- steel, low-alloyed, hot rolled: 1.88 kg; lognormal variance with pedigree 0.0226, pedigree (3,3,5,5,3)
  properties: carbon content, fossil 0.005, dry mass 1 kg, wet mass 1 kg
- tin: 0.005 kg; lognormal variance with pedigree 0.1446, pedigree (3,3,5,5,3)
  properties: dry mass 1 kg, wet mass 1 kg
- used railway track: -1 m*year; lognormal variance with pedigree 0.002, pedigree (1,1,1,5,1)
  properties: carbon content, fossil 8.23188e-5, dry mass 690 kg, wet mass 690 kg

## Inputs from nature
- Occupation, traffic area, rail network [natural resource, land]: 13.3 m2*year; lognormal variance with pedigree 0.002, pedigree (1,1,5,5,1)
- Occupation, traffic area, rail/road embankment [natural resource, land]: 10.4 m2*year; lognormal variance with pedigree 0.122, pedigree (1,1,5,5,1)
- Transformation, from unspecified [natural resource, land]: 0.237 m2; lognormal variance with pedigree 0.042, pedigree (1,1,5,5,1)
- Transformation, to traffic area, rail network [natural resource, land]: 0.133 m2; lognormal variance with pedigree 0.122, pedigree (1,1,5,5,1)
- Transformation, to traffic area, rail/road embankment [natural resource, land]: 0.104 m2; lognormal variance with pedigree 0.122, pedigree (1,1,5,5,1)

## Emissions to nature
- Glyphosate [soil, industrial]: 0.0007 kg; lognormal variance with pedigree 0.122, pedigree (1,1,5,5,1)
- Oils, non-fossil [soil, unspecified]: 0.00753 kg; lognormal variance with pedigree 0.012, pedigree (1,1,5,5,1)

## Sampling procedure
literature

## Extrapolations
none This dataset has been copied from an original dataset covering the geography DE. The uncertainty has been adjusted accordingly.

## Review by Niels Jungbluth 2004-04-16
passed

## Review by Carl Vadenbo 2012-06-29
In preparation for the release of ecoinvent v3.0, the datasets 'railway track, ICE, DE' and 'operation, maintenance, railway track, ICE, DE' in ecoinvent v2.2 were merged and extrapolated into the dataset 'railway track construction, for high-speed train, GLO 2000'. The amounts of the exchanges were reviewed and were found to correspond to the disaggregated datasets. The amounts and the uncertainty information of the exchanges were reviewed and were found to correspond to the disaggregated datasets, and the dataset was accepted for inclusion into the ecoinvent database on 2012.07.04.
