# sulfate pulp production, from softwood, bleached

Dataset: EcoSpold 2, unit process
Geography: RoW
Time period: 2020-01-01 to 2022-12-31
Technology level: current
Classification: ISIC rev.4 ecoinvent: 1701:Manufacture of pulp, paper and paperboard
Synonyms: Kraftzellstoff; kraft pulp
Scenario: Business-as-Usual
System model: Substitution, consequential, long-term
Generated by: Nora Minas
Database: ecoinvent
isCopyrightProtected: true
accessRestrictedTo: 1

## General comment
This dataset has been extrapolated from respective regional geographies (RER). It represents an aggregation of the production of Elemental Chlorine Free (ECF) and Totally Chlorine Free (TCF) kraft pulp, obtained from softwood for the year 2020. Industry data was used which was provided by the European Pulp Industry Sector Association AISBL (EPIS). Values represent weighted average of 16 corresponding pulp mills located in Nordic countries and Germany. The used values are a weighted average of all corresponding pulp mills. The represented technology is considered state of the art for an European average.
PULP is a wood-based raw material to make different paper, board and other products. The pulp, or fibers from the wood are separated in a kraft cooking process in a so-called fiber line. In a recovery line, the chemicals used in the cooking process are recovered to be used again and energy is produced. The third process is effluent treatment where gaseous and liquid discharges to the environment are continuously minimized and monitored.
MAIN END USES FOR MARKET PULP • Tissue (toilet paper) • Graphic papers • Specialty products • Packaging • Fluff pulp • Viscose • CMC etc.
PRODUCTS GENERATED IN THE PULPING PROCESS include crude tall oil, turpentine, biogas from sludge, electricity, heat etc.
CAPACITIES World’s total market capacities for softwood kraft pulp, hardwood kraft pulp, and eucalyptus kraft pulp were 28.9 million tons, 15 million tons, and 26.2 million tons, respectively.
SPECIES Softwood pulp is made from coniferous trees, most typically from different species of pine and spruce. Hardwood pulp is made from non-coniferous trees, in Nordic countries primarily of birch. Eucalyptus hardwood pulp is made exclusively of eucalyptus species.
CHARACTERISTICS Softwood fibers are long and slender and are used to give the paper and board products their strength properties. Hardwood fibers are short and can be rounder and their number per gram of pulp is much larger; they give the end product its smoothness, softness and optical properties like opacity (that you cannot see through the paper).

## Included activities start
This activity starts with the reception of the pulpwood at the factory gate.

## Included activities end
The process includes wood handling, chemical pulping and bleaching, drying process, energy production on-site, recovery cycles of chemicals and internal wastewater treatment. The following air emissions were reported in the industry: CO2 (fossil and biogenic), SOx (as SO2), NOx, TRS (as S), SO2 (reported as S), Dust (unspecified). Next to these key emissions, additional emissions from on-site energy production from external and internal fuels were calculated, using emission profiles from ecoinvent combustion processes. Internal biogenic fuels are represented by the calculated emissions but do not have the corresponding fuel input from technosphere, because they are supplied from within the system boundaries. The amounts of internal fuels used in the process are: Biogas (55MJ/t), Bark (1952MJ/t), Black liquor(18349MJ/t), Sludge (61 MJ/t), Methanol (145 MJ/t), Biomass (6 MJ/t), tall oil pitch (229 MJ/t), Biomass (wood residuals) (84 MJ/t). Black liquor, sludge, tall oil pitch, and sodium formiate were not included in the emissions calculations because no specific emission profiles, e.g. for the black liquor recovery process, were available. Emissions from these internal energy generation processes are therefore only reflected in the key emission factors provided by the industry, other emissions constitute a data gap. The production of 8.43E-06 kg of the by-product “white liquor” per kg of pulp was excluded from the activity since no appropriate proxy could be found. The activity ends when the kraft pulp is ready to be sold.

## Geography
This dataset has been extrapolated from respective regional geographies (RER). Data is coming from mills in Nordic countries and Germany.

## Technology
Average European technology in 2020 of kraft pulp production of ECF and TCF pulp

## Time period
Data gathered in 2021 and represents data of 2020 values. Recent technology valid for the upcoming years.

## Reference product
- sulfate pulp, bleached: 1 kg; By-product classification allocatable product; CPC 32112: Chemical wood pulp, other than dissolving grades
  production volume 2.03008e10 kg
  properties: carbon allocation 0.4446 kg, carbon content 0.494, carbon content, fossil 0, carbon content, non-fossil 0.494, dry mass 0.9 kg, heating value, net 13.23 MJ, price 0.355 EUR2005, water content 0.111111, water in wet mass 0.1 kg, wet mass 1 kg

## Inputs from technosphere
- EDTA, ethylenediaminetetraacetic acid: 0.000655524 kg; lognormal variance with pedigree 0.0027, pedigree (1,2,1,5,1)
  properties: carbon content, fossil 0.410959, dry mass 1 kg, heating value, net 19.09 MJ, wet mass 1 kg
- aluminium scrap, post-consumer: -2.82504e-5 kg; lognormal variance with pedigree 0.0027, pedigree (1,2,1,5,1)
  properties: dry mass 1 kg, price 0.685 EUR2005, wet mass 1 kg
- aluminium sulfate, powder: 0.000673918 kg; lognormal variance with pedigree 0.0027, pedigree (1,2,1,5,1)
  properties: dry mass 1 kg, wet mass 1 kg
- bark chips, wet, measured as dry mass: -0.0894263, -0.0894263 kg (2 suppliers, which the file names only by identifier); sum of these -0.178853 kg
  properties: carbon content, non-fossil 0.494, dry mass 1 kg, heating value, net 4.81 MJ, price 0.036415 EUR2005, water content 1.4, wet mass 2.4 kg
- biogas: 0.00390163 m3; lognormal variance with pedigree 0.0113, pedigree (2,2,1,5,3)
  properties: carbon content, non-fossil 0.449939, dry mass 1.15 kg, heating value, net 22.73 MJ, wet mass 1.15 kg
- calcium carbonate, precipitated: 0.00205628 kg; lognormal variance with pedigree 0.0027, pedigree (1,2,1,5,1)
  properties: carbon content, fossil 0.120005, dry mass 1 kg, wet mass 1 kg
- chemical, inorganic: 7.5e-6 kg; lognormal variance with pedigree 0.0038, pedigree (2,3,1,5,1)
  properties: carbon content, fossil 0.003, dry mass 1 kg, wet mass 1 kg
- chemical, organic: 0.000529129 kg; lognormal variance with pedigree 0.0038, pedigree (2,3,1,5,1)
  properties: carbon content, fossil 0.628, dry mass 1 kg, heating value, net 19.03 MJ, wet mass 1 kg
- chlorine dioxide: 0.0046152 kg; lognormal variance with pedigree 0.0027, pedigree (1,2,1,5,1)
  properties: dry mass 1 kg, wet mass 1 kg
- copper scrap, sorted, pressed: -2.97373e-6 kg; lognormal variance with pedigree 0.0027, pedigree (1,2,1,5,1)
  properties: dry mass 1 kg, price 2.84 EUR2005, wet mass 1 kg
- digester sludge: -0.000958251 kg; lognormal variance with pedigree 0.0027, pedigree (1,2,1,5,1)
  properties: carbon content, non-fossil 0.3444, dry mass 0.05 kg, heating value, net 2.42 MJ, water content 19, wet mass 1 kg
- electricity, high voltage: -0.280971, -0.0236677, -0.0161032, -0.00126603, -0.00126581, -0.0354553 kWh (6 suppliers, which the file names only by identifier); sum of these -0.358729 kWh
  properties: price 0.107332 EUR2005
- electronics scrap: -0.000181053 kg; lognormal variance with pedigree 0.0027, pedigree (1,2,1,5,1)
  properties: carbon content, fossil 0.317311, carbon content, non-fossil 0.004557, dry mass 1 kg, price 16.1 EUR2005, wet mass 1 kg
- green liquor dregs: -0.0146643 kg; lognormal variance with pedigree 0.0027, pedigree (1,2,1,5,1)
  properties: carbon content, non-fossil 0.390667, dry mass 0.75 kg, water content 0.333333, wet mass 1 kg
- hard coal: 2.53935e-6, 5.97129e-6, 4.14122e-5, 1.38851e-6, 9.72562e-6, 8.72386e-6, 1.29048e-5, 5.85147e-6 kg (8 suppliers, which the file names only by identifier); sum of these 8.85171e-5 kg; lognormal variance with pedigree 0.0113, pedigree (2,2,1,5,3)
  properties: carbon content, fossil 0.845, dry mass 0.94 kg, heating value, net 27.91 MJ, water content 0.0638298, wet mass 1 kg
- hazardous waste, for incineration: -0.000213191 kg; lognormal variance with pedigree 0.0027, pedigree (1,2,1,5,1)
  properties: carbon content, fossil 0.554667, dry mass 0.75 kg, heating value, net 17 MJ, water content 0.333333, wet mass 1 kg
- heat, district or industrial, natural gas: 0.00518213, 0.034152 MJ (2 suppliers, which the file names only by identifier); sum of these 0.0393342 MJ; lognormal variance with pedigree 0.0027, pedigree (1,2,1,5,1)
  properties: heating value, net 1 MJ
- heat, district or industrial, other than natural gas: -0.00174642, -1.00014 MJ (2 suppliers, which the file names only by identifier); sum of these -1.00188 MJ; lognormal variance with pedigree 0.0027, pedigree (1,2,1,5,1)
  properties: heating value, net 1 MJ, price 0.0106 EUR2005
- heavy fuel oil: 5.19751e-5, 0.000276063, 0.00645338, 0.000357958, 9.32529e-5, 5.43024e-5 kg (6 suppliers, which the file names only by identifier); sum of these 0.00728693 kg; lognormal variance with pedigree 0.0113, pedigree (2,2,1,5,3)
  properties: carbon content, fossil 0.849, dry mass 1 kg, heating value, net 41.2 MJ, wet mass 1 kg
- hydrochloric acid, without water, in 30% solution state: 0.000364841 kg; lognormal variance with pedigree 0.0027, pedigree (1,2,1,5,1)
  properties: dry mass 1 kg, heating value, net 3.32 MJ, wet mass 1 kg
- hydrogen peroxide, without water, in 50% solution state: 0.0106376 kg; lognormal variance with pedigree 0.0027, pedigree (1,2,1,5,1)
  properties: dry mass 1 kg, heating value, net 7.13 MJ, wet mass 1 kg
- iron scrap, unsorted: -0.000266148 kg; lognormal variance with pedigree 0.0027, pedigree (1,2,1,5,1)
  properties: dry mass 1 kg, price 0.149 EUR2005, wet mass 1 kg
- light fuel oil: 1.34748e-6, 9.34351e-6, 1.81317e-6, 1.88574e-5, 0.000505679, 1.25136e-6 kg (6 suppliers, which the file names only by identifier); sum of these 0.000538292 kg; lognormal variance with pedigree 0.0113, pedigree (2,2,1,5,3)
  properties: carbon content, fossil 0.862, dry mass 1 kg, heating value, net 42.6 MJ, wet mass 1 kg
- limestone residue: -0.0167315 kg; lognormal variance with pedigree 0.0027, pedigree (1,2,1,5,1)
  properties: carbon content, fossil 0.0148226, dry mass 0.995 kg, water content 0.00502513, wet mass 1 kg
- magnesium sulfate: 0.002697 kg; lognormal variance with pedigree 0.0027, pedigree (1,2,1,5,1)
  properties: dry mass 1 kg, wet mass 1 kg
- malusil: 0.000600154 kg; lognormal variance with pedigree 0.0027, pedigree (1,2,1,5,1)
  properties: dry mass 1 kg, wet mass 1 kg
- methanol: 0.000175 kg; lognormal variance with pedigree 0.0027, pedigree (1,2,1,5,1)
  properties: carbon content, fossil 0.375, dry mass 1 kg, heating value, net 20 MJ, wet mass 1 kg
- methanol, from biomass: 0.00184411 kg
  properties: carbon content, non-fossil 0.375375, dry mass 0.999 kg, heating value, net 26.48 MJ, price -0.314045 EUR2005, water content 0.001001, wet mass 1 kg
- municipal solid waste: -0.00413897, -5.85229e-6, -1.47463e-6, -2.10733e-6 kg (4 suppliers, which the file names only by identifier); sum of these -0.0041484 kg; lognormal variance with pedigree 0.0027, pedigree (1,2,1,5,1)
  properties: carbon content, fossil 0.171549, carbon content, non-fossil 0.261655, dry mass 0.771 kg, heating value, net 11.74 MJ, water content 0.297017, wet mass 1 kg
- natural gas, high pressure: 0.000745685, 0.000154327, 0.000143059, 4.02888e-5, 0.000309678, 8.89768e-5, 5.66775e-5, 6.19697e-5, 3.75574e-5, 4.4386e-5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 m3 (24 suppliers, which the file names only by identifier); sum of these 0.0107983 m3; lognormal variance with pedigree 0.0113, pedigree (2,2,1,5,3)
  properties: carbon content, fossil 0.75, dry mass 0.84 kg, heating value, net 36 MJ, wet mass 0.84 kg
- oxygen, liquid: 0.0216427 kg; lognormal variance with pedigree 0.0027, pedigree (1,2,1,5,1)
  properties: dry mass 1 kg, wet mass 1 kg
- ozone, liquid: 2.88488e-5 kg; lognormal variance with pedigree 0.0027, pedigree (1,2,1,5,1)
  properties: dry mass 1 kg, wet mass 1 kg
- pulp factory: 4.787e-11 unit; lognormal variance with pedigree 0.3041, pedigree (3,2,1,5,1)
- pulpwood, softwood, measured as solid wood under bark: 0.00467218 m3; lognormal variance with pedigree 0.0027, pedigree (1,2,1,5,1)
  properties: basic wood density 387.2, carbon content, non-fossil 0.494, dry mass 440 kg, heating value, net 4483.78 MJ, water content 0.8, wet mass 792 kg
- quicklime, milled, loose: 0.013512 kg; lognormal variance with pedigree 0.0027, pedigree (1,2,1,5,1)
  properties: dry mass 0.99 kg, water content 0.010101, wet mass 1 kg
- sawdust, wet, measured as dry mass: -0.000235841, -0.000235841 kg (2 suppliers, which the file names only by identifier); sum of these -0.000471683 kg; lognormal variance with pedigree 0.0027, pedigree (1,2,1,5,1)
  properties: carbon content, non-fossil 0.494, dry mass 1 kg, heating value, net 7.79 MJ, price 0.101 EUR2005, water content 0.7, wet mass 1.7 kg
- sludge from pulp and paper production: -0.00187364 kg; lognormal variance with pedigree 0.0027, pedigree (1,2,1,5,1)
  properties: carbon content, non-fossil 0.21, dry mass 0.75 kg, heating value, net 2.65 MJ, water content 0.333333, wet mass 1 kg
- sodium chlorate, powder: 0.0124226 kg; lognormal variance with pedigree 0.0027, pedigree (1,2,1,5,1)
  properties: dry mass 1 kg, wet mass 1 kg
- sodium formate: 0.000826769 kg; lognormal variance with pedigree 0.0113, pedigree (2,2,1,5,3)
  properties: carbon content, fossil 0.176471, dry mass 1 kg, heating value, net 7.13 MJ, wet mass 1 kg
- sodium hydrogen sulfite: 0.00156289 kg; lognormal variance with pedigree 0.0027, pedigree (1,2,1,5,1)
  properties: dry mass 1 kg, wet mass 1 kg
- sodium hydroxide, without water, in 50% solution state: 0.0290302 kg; lognormal variance with pedigree 0.0027, pedigree (1,2,1,5,1)
  properties: dry mass 1 kg, heating value, net 3.03 MJ, wet mass 1 kg
- sodium hypochlorite, without water, in 15% solution state: 9.4e-7 kg; lognormal variance with pedigree 0.0027, pedigree (1,2,1,5,1)
  properties: dry mass 1 kg, wet mass 1 kg
- sodium sulfate, anhydrite: 0.000378246 kg; lognormal variance with pedigree 0.0027, pedigree (1,2,1,5,1)
  properties: dry mass 1 kg, wet mass 1 kg
- sulfur: 5.57977e-5 kg; lognormal variance with pedigree 0.0027, pedigree (1,2,1,5,1)
  properties: dry mass 1 kg, wet mass 1 kg
- sulfuric acid: 0.0269418 kg; lognormal variance with pedigree 0.0027, pedigree (1,2,1,5,1)
  properties: dry mass 1 kg, wet mass 1 kg
- tall oil, crude: -0.0300465 kg; lognormal variance with pedigree 0.0027, pedigree (1,2,1,5,1)
  properties: carbon content, non-fossil 0.786, dry mass 1 kg, heating value, net 23.82 MJ, price 0.652995 EUR2005, wet mass 1 kg
- turpentine: -0.00144513 kg; lognormal variance with pedigree 0.0027, pedigree (1,2,1,5,1)
  properties: carbon content, non-fossil 0.882353, dry mass 1 kg, heating value, net 26.74 MJ, price 1.826 EUR2005, wet mass 1 kg
- waste mineral oil: -0.000509492 kg; lognormal variance with pedigree 0.0027, pedigree (1,2,1,5,1)
  properties: carbon content, fossil 0.864444, dry mass 0.9 kg, heating value, net 34.7 MJ, water content 0.111111, wet mass 1 kg
- waste packaging paper: -3.16884e-7, -3.18169e-6, -1.71187e-7, -4.24839e-8, -5.9105e-5, -1.75561e-6, -4.85858e-7 kg (7 suppliers, which the file names only by identifier); sum of these -6.50588e-5 kg; lognormal variance with pedigree 0.0027, pedigree (1,2,1,5,1)
  properties: carbon content, fossil 0.3635, carbon content, non-fossil 0.1432, dry mass 1 kg, heating value, net 14.11 MJ, price 0.1 EUR2005, wet mass 1 kg
- waste plastic, mixture: -5.60684e-7, -3.9251e-6, -1.46935e-8, -1.54735e-8, -2.83325e-9, -3.74628e-8, -6.2511e-9 kg (7 suppliers, which the file names only by identifier); sum of these -4.5625e-6 kg; lognormal variance with pedigree 0.0027, pedigree (1,2,1,5,1)
  properties: carbon content, fossil 0.747344, dry mass 0.847 kg, heating value, net 30.79 MJ, water content 0.180638, wet mass 1 kg
- waste wood, untreated: -3.68032e-6, -6.98531e-5, -0.000926738, -8.67332e-6, -5.81828e-6, -2.43607e-5, -6.34117e-7 kg (7 suppliers, which the file names only by identifier); sum of these -0.00103976 kg; lognormal variance with pedigree 0.0027, pedigree (1,2,1,5,1)
  properties: carbon content, non-fossil 0.48632, dry mass 0.8 kg, heating value, net 13.99 MJ, water content 0.25, wet mass 1 kg
- wood ash mixture, pure: -0.00181063 kg; lognormal variance with pedigree 0.0027, pedigree (1,2,1,5,1)
  properties: carbon content, non-fossil 0.012, dry mass 1 kg, wet mass 1 kg
- wood chips, wet, measured as dry mass: 0.444224, 0.00100651 kg (2 suppliers, which the file names only by identifier); sum of these 0.445231 kg; lognormal variance with pedigree 0.0027, pedigree (1,2,1,5,1)
  properties: carbon content, non-fossil 0.494, dry mass 1 kg, heating value, net 10.84 MJ, water content 1.1, wet mass 2.1 kg
- wood pellet, measured as dry mass: 0.00948206 kg; lognormal variance with pedigree 0.0113, pedigree (2,2,1,5,3)
  properties: carbon content, non-fossil 0.494, dry mass 1 kg, heating value, net 13.38 MJ, water content 0.1, wet mass 1.1 kg

## Inputs from nature
- Oxygen [natural resource, in air]: 1.84252 kg; lognormal variance with pedigree 0.0512, pedigree (2,5,1,5,4)
- Water, unspecified natural origin [natural resource, in water]: 0.0716395 m3; lognormal variance with pedigree 0.0027, pedigree (1,2,1,5,1)

## Emissions to nature
- Acetaldehyde [air, urban air close to ground]: 1.89913e-7 kg; lognormal variance with pedigree 0.1406, pedigree (2,5,1,5,4)
- Acetic acid [air, urban air close to ground]: 2.84004e-7 kg; lognormal variance with pedigree 0.1406, pedigree (2,5,1,5,4)
- Acetone [air, urban air close to ground]: 4.43784e-8 kg; lognormal variance with pedigree 0.1406, pedigree (2,5,1,5,4)
- Aluminium III [air, urban air close to ground]: 2.64361e-8 kg; lognormal variance with pedigree 0.7006, pedigree (2,5,1,5,4)
- Ammonia [air, urban air close to ground]: 4.11371e-6 kg; lognormal variance with pedigree 0.1406, pedigree (2,5,1,5,4)
- Antimony ion [air, urban air close to ground]: 3.90364e-12 kg; lognormal variance with pedigree 0.7006, pedigree (2,5,1,5,4)
- Arsenic ion [air, urban air close to ground]: 6.28281e-9 kg; lognormal variance with pedigree 0.1406, pedigree (2,5,1,5,4)
- Barium II [air, urban air close to ground]: 3.11303e-10 kg; lognormal variance with pedigree 0.7006, pedigree (2,5,1,5,4)
- Benzene [air, urban air close to ground]: 2.44605e-6 kg; lognormal variance with pedigree 0.1406, pedigree (2,5,1,5,4)
- Benzene, ethyl- [air, urban air close to ground]: 7.12251e-8 kg; lognormal variance with pedigree 0.1406, pedigree (2,5,1,5,4)
- Benzene, hexachloro- [air, urban air close to ground]: 1.7094e-14 kg; lognormal variance with pedigree 0.1406, pedigree (2,5,1,5,4)
- Benzo(a)pyrene [air, urban air close to ground]: 1.20313e-9 kg; lognormal variance with pedigree 0.1406, pedigree (2,5,1,5,4)
- Beryllium II [air, urban air close to ground]: 3.11303e-12 kg; lognormal variance with pedigree 0.7006, pedigree (2,5,1,5,4)
- Boron [air, urban air close to ground]: 1.17109e-9 kg; lognormal variance with pedigree 0.7006, pedigree (2,5,1,5,4)
- Bromine [air, urban air close to ground]: 1.42474e-7 kg; lognormal variance with pedigree 0.1406, pedigree (2,5,1,5,4)
- Butane [air, urban air close to ground]: 5.04162e-7 kg; lognormal variance with pedigree 0.4006, pedigree (2,5,1,5,4)
- Cadmium II [air, urban air close to ground]: 1.66582e-9 kg; lognormal variance with pedigree 0.7006, pedigree (2,5,1,5,4)
- Calcium [air, urban air close to ground]: 1.39246e-5 kg; lognormal variance with pedigree 0.4006, pedigree (2,5,1,5,4)
- Carbon dioxide, fossil [air, urban air close to ground]: 0.0488981 kg; lognormal variance with pedigree 0.0512, pedigree (2,5,1,5,4)
- Carbon dioxide, non-fossil [air, urban air close to ground]: 2.484 kg; lognormal variance with pedigree 0.0027, pedigree (1,2,1,5,1)
- Carbon monoxide, fossil [air, urban air close to ground]: 3.29395e-6 kg; lognormal variance with pedigree 0.7006, pedigree (2,5,1,5,4)
- Carbon monoxide, non-fossil [air, urban air close to ground]: 0.000712858 kg; lognormal variance with pedigree 0.7006, pedigree (2,5,1,5,4)
- Chlorine [air, urban air close to ground]: 4.27351e-7 kg; lognormal variance with pedigree 0.4006, pedigree (2,5,1,5,4)
- Chromium III [air, urban air close to ground]: 1.09218e-8 kg; lognormal variance with pedigree 0.7006, pedigree (2,5,1,5,4)
- Chromium VI [air, urban air close to ground]: 1.16628e-10 kg; lognormal variance with pedigree 0.7006, pedigree (2,5,1,5,4)
- Cobalt II [air, urban air close to ground]: 9.77105e-9 kg; lognormal variance with pedigree 0.7006, pedigree (2,5,1,5,4)
- Copper ion [air, urban air close to ground]: 7.30203e-8 kg; lognormal variance with pedigree 0.7006, pedigree (2,5,1,5,4)
- Dinitrogen monoxide [air, urban air close to ground]: 5.78447e-6 kg; lognormal variance with pedigree 0.1406, pedigree (2,5,1,5,4)
- Dioxins, measured as 2,3,7,8-tetrachlorodibenzo-p-dioxin [air, urban air close to ground]: 7.38134e-14 kg; lognormal variance with pedigree 0.1406, pedigree (2,5,1,5,4)
- Ethane [air, urban air close to ground]: 3.70599e-9 kg; lognormal variance with pedigree 0.0906, pedigree (2,5,1,5,4)
- Ethanol [air, urban air close to ground]: 8.87568e-8 kg; lognormal variance with pedigree 0.1406, pedigree (2,5,1,5,4)
- Ethylene [air, urban air close to ground]: 7.41198e-9 kg; lognormal variance with pedigree 0.0906, pedigree (2,5,1,5,4)
- Ethyne [air, urban air close to ground]: 1.23533e-9 kg; lognormal variance with pedigree 0.0906, pedigree (2,5,1,5,4)
- Fluorine [air, urban air close to ground]: 1.18709e-7 kg; lognormal variance with pedigree 0.1406, pedigree (2,5,1,5,4)
- Formaldehyde [air, urban air close to ground]: 5.33558e-7 kg; lognormal variance with pedigree 0.1406, pedigree (2,5,1,5,4)
- Hydrocarbons, aliphatic, alkanes, unspecified [air, urban air close to ground]: 2.35023e-6 kg; lognormal variance with pedigree 0.1406, pedigree (2,5,1,5,4)
- Hydrocarbons, aliphatic, unsaturated [air, urban air close to ground]: 7.37004e-6 kg; lognormal variance with pedigree 0.1406, pedigree (2,5,1,5,4)
- Hydrocarbons, aromatic [air, urban air close to ground]: 4.50647e-8 kg; lognormal variance with pedigree 0.1386, pedigree (2,5,1,1,4)
- Hydrochloric acid [air, urban air close to ground]: 5.28245e-7 kg; lognormal variance with pedigree 0.1406, pedigree (2,5,1,5,4)
- Hydrogen fluoride [air, urban air close to ground]: 1.752e-8 kg; lognormal variance with pedigree 0.1406, pedigree (2,5,1,5,4)
- Hydrogen sulfide [air, urban air close to ground]: 4.6531e-5 kg; lognormal variance with pedigree 0.0421, pedigree (1,2,1,5,1)
- Iodine [air, urban air close to ground]: 2.81655e-11 kg; lognormal variance with pedigree 0.7006, pedigree (2,5,1,5,4)
- Iron ion [air, urban air close to ground]: 2.53522e-7 kg; lognormal variance with pedigree 0.7006, pedigree (2,5,1,5,4)
- Lead II [air, urban air close to ground]: 1.02441e-7 kg; lognormal variance with pedigree 0.7006, pedigree (2,5,1,5,4)
- Lead-210 [air, urban air close to ground]: 1.14886e-7 kBq; lognormal variance with pedigree 0.7006, pedigree (2,5,1,5,4)
- Magnesium [air, urban air close to ground]: 8.64065e-7 kg; lognormal variance with pedigree 0.7006, pedigree (2,5,1,5,4)
- Manganese II [air, urban air close to ground]: 4.03664e-7 kg; lognormal variance with pedigree 0.7006, pedigree (2,5,1,5,4)
- Mercury II [air, urban air close to ground]: 7.96383e-10 kg; lognormal variance with pedigree 0.7006, pedigree (2,5,1,5,4)
- Methane, fossil [air, urban air close to ground]: 1.77742e-6 kg; lognormal variance with pedigree 0.1406, pedigree (2,5,1,5,4)
- Methane, non-fossil [air, urban air close to ground]: 7.70012e-6 kg; lognormal variance with pedigree 0.1406, pedigree (2,5,1,5,4)
- Methanol [air, urban air close to ground]: 1.50887e-7 kg; lognormal variance with pedigree 0.1406, pedigree (2,5,1,5,4)
- Molybdenum VI [air, urban air close to ground]: 2.37856e-9 kg; lognormal variance with pedigree 0.7006, pedigree (2,5,1,5,4)
- NMVOC, non-methane volatile organic compounds [air, urban air close to ground]: 1.66234e-5 kg; lognormal variance with pedigree 0.1386, pedigree (2,5,1,1,4)
- Nickel II [air, urban air close to ground]: 1.59261e-7 kg; lognormal variance with pedigree 0.7006, pedigree (2,5,1,5,4)
- Nitrogen oxides [air, urban air close to ground]: 0.00148035 kg; lognormal variance with pedigree 0.0421, pedigree (1,2,1,5,1)
- PAH, polycyclic aromatic hydrocarbons [air, urban air close to ground]: 3.36375e-8 kg; lognormal variance with pedigree 0.1406, pedigree (2,5,1,5,4)
- Particulate Matter, < 2.5 um [air, unspecified]: 0.000216283 kg; lognormal variance with pedigree 0.306, pedigree (3,4,1,5,1)
- Particulate Matter, > 10 um [air, urban air close to ground]: 7.34761e-7 kg; lognormal variance with pedigree 0.0906, pedigree (2,5,1,5,4)
- Particulate Matter, > 2.5 um and < 10um [air, unspecified]: 6.33987e-6 kg; lognormal variance with pedigree 0.1706, pedigree (2,5,1,5,4)
- Pentane [air, urban air close to ground]: 8.56728e-7 kg; lognormal variance with pedigree 0.1406, pedigree (2,5,1,5,4)
- Phenol, pentachloro- [air, urban air close to ground]: 1.92308e-11 kg; lognormal variance with pedigree 0.1406, pedigree (2,5,1,5,4)
- Phosphorus [air, urban air close to ground]: 7.12408e-7 kg; lognormal variance with pedigree 0.1406, pedigree (2,5,1,5,4)
- Polonium-210 [air, urban air close to ground]: 2.10006e-7 kBq; lognormal variance with pedigree 0.7006, pedigree (2,5,1,5,4)
- Potassium I [air, urban air close to ground]: 5.55587e-5 kg; lognormal variance with pedigree 0.7006, pedigree (2,5,1,5,4)
- Potassium-40 [air, urban air close to ground]: 3.33539e-8 kBq; lognormal variance with pedigree 0.7006, pedigree (2,5,1,5,4)
- Propane [air, urban air close to ground]: 1.53794e-7 kg; lognormal variance with pedigree 0.1406, pedigree (2,5,1,5,4)
- Propene [air, urban air close to ground]: 1.23533e-9 kg; lognormal variance with pedigree 0.0906, pedigree (2,5,1,5,4)
- Propionic acid [air, urban air close to ground]: 1.41987e-8 kg; lognormal variance with pedigree 0.1406, pedigree (2,5,1,5,4)
- Radium-226 [air, urban air close to ground]: 2.96479e-8 kBq; lognormal variance with pedigree 0.7006, pedigree (2,5,1,5,4)
- Radium-228 [air, urban air close to ground]: 1.60593e-7 kBq; lognormal variance with pedigree 0.7006, pedigree (2,5,1,5,4)
- Radon-220 [air, urban air close to ground]: 2.47066e-9 kBq; lognormal variance with pedigree 0.7006, pedigree (2,5,1,5,4)
- Radon-222 [air, urban air close to ground]: 2.47066e-9 kBq; lognormal variance with pedigree 0.7006, pedigree (2,5,1,5,4)
- Scandium [air, urban air close to ground]: 3.11303e-12 kg; lognormal variance with pedigree 0.7006, pedigree (2,5,1,5,4)
- Selenium IV [air, urban air close to ground]: 3.57369e-9 kg; lognormal variance with pedigree 0.7006, pedigree (2,5,1,5,4)
- Silicon [air, urban air close to ground]: 3.90364e-8 kg; lognormal variance with pedigree 0.7006, pedigree (2,5,1,5,4)
- Sodium [air, urban air close to ground]: 3.30988e-6 kg; lognormal variance with pedigree 0.7006, pedigree (2,5,1,5,4)
- Strontium [air, urban air close to ground]: 4.69426e-10 kg; lognormal variance with pedigree 0.7006, pedigree (2,5,1,5,4)
- Sulfur dioxide [air, urban air close to ground]: 0.0001909 kg; lognormal variance with pedigree 0.0027, pedigree (1,2,1,5,1)
- Sulfur oxides [air, unspecified]: 0.000160567 kg; lognormal variance with pedigree 0.0027, pedigree (1,2,1,5,1)
- Thallium I [air, urban air close to ground]: 3.90364e-12 kg; lognormal variance with pedigree 0.7006, pedigree (2,5,1,5,4)
- Thorium [air, urban air close to ground]: 4.69426e-12 kg; lognormal variance with pedigree 0.7006, pedigree (2,5,1,5,4)
- Thorium-228 [air, urban air close to ground]: 1.35886e-8 kBq; lognormal variance with pedigree 0.7006, pedigree (2,5,1,5,4)
- Thorium-232 [air, urban air close to ground]: 8.64731e-9 kBq; lognormal variance with pedigree 0.7006, pedigree (2,5,1,5,4)
- Tin ion [air, urban air close to ground]: 1.56146e-12 kg; lognormal variance with pedigree 0.7006, pedigree (2,5,1,5,4)
- Titanium ion [air, urban air close to ground]: 9.36381e-10 kg; lognormal variance with pedigree 0.7006, pedigree (2,5,1,5,4)
- Toluene [air, urban air close to ground]: 8.64048e-7 kg; lognormal variance with pedigree 0.1406, pedigree (2,5,1,5,4)
- Uranium [air, urban air close to ground]: 6.25077e-12 kg; lognormal variance with pedigree 0.7006, pedigree (2,5,1,5,4)
- Uranium-238 [air, urban air close to ground]: 2.47066e-8 kBq; lognormal variance with pedigree 0.7006, pedigree (2,5,1,5,4)
- Vanadium V [air, urban air close to ground]: 2.9595e-7 kg; lognormal variance with pedigree 0.7006, pedigree (2,5,1,5,4)
- Water [air, unspecified]: 0.00077237 m3; lognormal variance with pedigree 0.0446, pedigree (3,3,1,5,1)
- Xylene [air, urban air close to ground]: 2.47066e-10 kg; lognormal variance with pedigree 0.0906, pedigree (2,5,1,5,4)
- Zinc II [air, urban air close to ground]: 7.44545e-7 kg; lognormal variance with pedigree 0.7006, pedigree (2,5,1,5,4)
- m-Xylene [air, urban air close to ground]: 2.84901e-7 kg; lognormal variance with pedigree 0.1406, pedigree (2,5,1,5,4)
- AOX, Adsorbable Organic Halogen [water, surface water]: 8.27441e-5 kg; lognormal variance with pedigree 0.0421, pedigree (1,2,1,5,1)
- BOD5, Biological Oxygen Demand [water, surface water]: 0.000407549 kg; lognormal variance with pedigree 0.0421, pedigree (1,2,1,5,1)
- COD, Chemical Oxygen Demand [water, surface water]: 0.0114063 kg; lognormal variance with pedigree 0.0421, pedigree (1,2,1,5,1)
- DOC, Dissolved Organic Carbon [water, surface water]: 0.00407989 kg; lognormal variance with pedigree 0.0432, pedigree (2,3,1,5,1)
- Nitrogen [water, surface water]: 0.000119771 kg; lognormal variance with pedigree 0.0421, pedigree (1,2,1,5,1)
- Phosphorus [water, surface water]: 1.23568e-5 kg; lognormal variance with pedigree 0.0421, pedigree (1,2,1,5,1)
- Suspended solids, unspecified [water, surface water]: 0.000778025 kg; lognormal variance with pedigree 0.0421, pedigree (1,2,1,5,1)
- TOC, Total Organic Carbon [water, surface water]: 0.00407989 kg; lognormal variance with pedigree 0.0421, pedigree (1,2,1,5,1)
- Water [water, unspecified]: 0.0716395 m3; lognormal variance with pedigree 0.0421, pedigree (1,2,1,5,1)

## Sampling procedure
This dataset has been extrapolated from respective regional geographies (RER). The RER data represents a weighted average of about 16 mills providing 86% of the European capacity of bleached kraft pulp from softwood.

## Extrapolations
This dataset has been extrapolated from respective regional geographies (RER). For the RER dataset, Industry data provided key emission factors for CO2 (biogenic), SOx (as SO2), NOx, TRS (as S), SO2 (reported as S), and Dust (unspecified). Additional air emissions resulting from on-site energy production, i.e. the combustion of fuels, were calculated based on industrial heating datasets from the ecoinvent database. The following ecoinvent combustion processes were used to estimate additional air emissions: Hard coal: heat production, at hard coal industrial furnace 1-10MW, Europe without Switzerland; Heavy fuel oil: heat production, heavy fuel oil, at industrial furnace 1MW, Europe without Switzerland; Light fuel oil: heat production, light fuel oil, at industrial furnace 1MW, Europe without Switzerland; Biofuel - Biogas: heat production, natural gas, at industrial furnace >100kW, Europe without Switzerland; Methanol: heat production, natural gas, at industrial furnace >100kW, Europe without Switzerland; Natural gas: heat production, natural gas, at industrial furnace >100kW, Europe without Switzerland; Biofuel - Bark (wet weight): heat production, wood chips from industry, at furnace 1000kW, CH; Biofuel - Biomass: heat production, wood chips from industry, at furnace 1000kW, CH; Biofuel - Biomass - wood residuals: heat production, wood chips from industry, at furnace 1000kW, CH; Biofuel - Bark: heat production, wood chips from industry, at furnace 1000kW, CH; Wood pellets: heat production, wood chips from industry, at furnace 1000kW, CH;. CO2, CO and CH4 emissions from biogas and methanol were modelled as non-fossil.
