# transport, freight train, electricity

Dataset: EcoSpold 2, unit process
Geography: Europe without Switzerland
Time period: 2000-01-01 to 2022-12-31
Technology level: current
Classification: ISIC rev.4 ecoinvent: 4912:Freight rail transport
Scenario: Business-as-Usual
System model: Substitution, consequential, long-term
Generated by: Frédéric Gindroz
Published in: Spielmann M. 2007
Database: ecoinvent
isCopyrightProtected: true
accessRestrictedTo: 1

## General comment
The dataset represents the entire transport life cycle of an electric freight train in Europe-15 (Belgium, Denmark, Germany, Greece, Spain, France, Ireland, Italy, Luxembourg, Netherlands, Austria, Portugal, Finalnd, Sweden and UK). The data of the energy use and operation emissions represents an electro goods train with a weight of 1000 Gt. Variation in the geography of different countries have been taken into account by classifying 15 European countries into 3 regions (flat, hilly, mountain).
[This dataset is meant to replace the following datasets:]

## Included activities start
The dataset starts with the production of a locomotive.

## Included activities end
The dataset ends with the service of transporting 1 ton over a distance of 1 km by an electric freight train. The dataset includes the production and the maintenance of the locomotive and the goods wagon, the construction of the railway track and the energy use and operation emissions of a freight train using electricity. The inventory includes as well the electricity consumption for an average European electro traction goods train (1000 Gt). In addition diesel consumption and emissions of shunting processes are accounted for.

## Geography
Data refers to average transport conditions in Europe (EU 15: Austria, Belgium, Denmark, Finland, France, Germany, Greece, Ireland, Italy, Luxembourg, Netherlands, Portugal, Spain, Sweden and the UK).The data for rail infrastructure reflect Swiss conditions. Data for vehicle manufacturing and maintenance represents generic European data. Data for the vehicle disposal reflect Swiss situation. Data of the energy and operation emissions refers to average goods transport conditions in Europe (EU 15).

## Technology
Demand factors of various transport components required to fulfill the functional unit of one tkm fright transport are presented. In order to account for the fact that the same rail tracks are used for both passenger and goods transportation are applied allocation factors. Electric traction and diesel locomotives for shunting processes.

## Time period
Data for the determination of European average is based on statistical data from 1998

## Reference product
- transport, freight train: 1 metric ton*km; By-product classification allocatable product; CPC 6512: Railway transport services of freight
  production volume 3.00164e11 metric ton*km
  properties: carbon allocation 0 kg, carbon content 0, price 0.026 EUR2005

## Inputs from technosphere
- diesel: 0.000677 kg; lognormal variance with pedigree 0.002, pedigree (1,1,5,1,1)
  properties: carbon content, fossil 0.865, dry mass 1 kg, heating value, net 42.8 MJ, wet mass 1 kg
- electricity, high voltage: 0.0478 kWh; lognormal variance with pedigree 0.002, pedigree (1,1,5,1,1)
- goods wagon: 4.59e-8 unit; lognormal variance with pedigree 0.02, pedigree (1,1,5,1,1)
- locomotive: 7.11e-10 unit; lognormal variance with pedigree 0.02, pedigree (1,1,5,1,1)
- maintenance, goods wagon: 4.59e-8 unit; lognormal variance with pedigree 0.02, pedigree (1,1,5,1,1)
- maintenance, locomotive: 7.11e-10 unit; lognormal variance with pedigree 0.02, pedigree (1,1,5,1,1)
- railway track: 9.3e-5 m*year; lognormal variance with pedigree 0.0221, pedigree (3,1,5,3,1)

## Emissions to nature
All rows: lognormal variance with pedigree 0.002, pedigree (1,1,5,1,1)
- Ammonia [air, unspecified]: 1.35e-8 kg
- Benzene [air, unspecified]: 6.77e-8 kg
- Cadmium II [air, unspecified]: 6.77e-12 kg
- Carbon dioxide, fossil [air, unspecified]: 0.00213 kg
- Carbon monoxide, fossil [air, unspecified]: 1.07e-5 kg
- Chromium III [air, unspecified]: 3.39e-11 kg
- Copper ion [air, unspecified]: 1.15e-9 kg
- Dinitrogen monoxide [air, unspecified]: 6.77e-8 kg
- Lead II [air, unspecified]: 7.45e-14 kg
- Mercury II [air, unspecified]: 1.35e-14 kg
- Methane, fossil [air, unspecified]: 8.8e-8 kg
- NMVOC, non-methane volatile organic compounds [air, unspecified]: 3.43e-6 kg
- Nickel II [air, unspecified]: 4.74e-11 kg
- Nitrogen oxides [air, unspecified]: 3.72e-5 kg
- Particulate Matter, < 2.5 um [air, unspecified]: 8.6857e-7 kg
- Particulate Matter, > 10 um [air, unspecified]: 1.5802e-5 kg
- Particulate Matter, > 2.5 um and < 10um [air, unspecified]: 6.9076e-6 kg
- Selenium IV [air, unspecified]: 6.77e-12 kg
- Sulfur dioxide [air, unspecified]: 4.06e-7 kg
- Sulfur hexafluoride [air, unspecified]: 2.1032e-9 kg
- Toluene [air, unspecified]: 2.71e-8 kg
- Xylene [air, unspecified]: 2.71e-8 kg
- Zinc II [air, unspecified]: 6.77e-10 kg
- Iron ion [soil, unspecified]: 6.02e-5 kg

## Sampling procedure
National statistics, literature studies

## Extrapolations
see Technology and Geography
