# window frame production, aluminium, U=1.6 W/m2K

Dataset: EcoSpold 2, unit process
Geography: RoW
Time period: 1996-01-01 to 2022-12-31
Technology level: current
Classification: EcoSpold01Categories: building components/windows
Classification: ISIC rev.4 ecoinvent: 2511:Manufacture of structural metal products
Tags: ConvertedDataset
Scenario: Business-as-Usual
System model: Substitution, consequential, long-term
Generated by: Martin Lehmann
Published in: Kellenberger D. 2007
Database: ecoinvent
isCopyrightProtected: true
accessRestrictedTo: 1

## General comment
This dataset describes all the processes and material inputs needed to produce a aluminium window frame with 1 m2 visible area. 1 m2 of visible aluminium window frame weighs 50.7 kg.
[This dataset was already contained in the ecoinvent database version 2. It was not individually updated during the transfer to ecoinvent version 3. Life Cycle Impact Assessment results may still have changed, as they are affected by changes in the supply chain, i.e. in other datasets. This dataset was generated following the ecoinvent quality guidelines for version 2. It may have been subject to central changes described in the ecoinvent version 3 change report (http://www.ecoinvent.org/database/ecoinvent-version-3/reports-of-changes/), and the results of the central updates were reviewed extensively. The changes added e.g. consistent water flows and other information throughout the database. The documentation of this dataset can be found in the ecoinvent reports of version 2, which are still available via the ecoinvent website. The change report linked above covers all central changes that were made during the conversion process.]

## Included activities end
Included processes are section bar rolling for steel parts and fittings, section bar extrusion for aluminium parts, extrusion of HDPE plastic, surface treatment (powder coating), all the road transport at different production phases, the heat waste and the disposal of the plastic cuttings.

## Geography
Window frames produced and sold in Switzerland and Germany.

## Technology
The dataset describes highly automated technology processes in window frame manufacturing.

## Reference product
- window frame, aluminium, U=1.6 W/m2K: 1 m2; By-product classification allocatable product; CPC 42120: Doors, windows and their frames and thresholds for doors, of iron, steel or aluminium
  production volume 2.67763 m2
  properties: carbon allocation 7.24382 kg, carbon content 0.142876, carbon content, fossil 0.142876, carbon content, non-fossil 0, dry mass 50.7 kg, heating value, net 219.49 MJ, price 209 EUR2005, water content 0, water in wet mass 0 kg, wet mass 50.7 kg

## Inputs from technosphere
- acrylonitrile-butadiene-styrene copolymer: 0.4 kg; lognormal variance with pedigree 0.0126, pedigree (1,3,5,5,1)
  properties: carbon content, fossil 0.853081, dry mass 1 kg, heating value, net 35.58 MJ, wet mass 1 kg
- adhesive, for metal: 0.29 kg; lognormal variance with pedigree 0.0126, pedigree (1,3,5,5,1)
  properties: carbon content, fossil 0.286533, dry mass 1 kg, heating value, net 8.68 MJ, wet mass 1 kg
- aluminium, wrought alloy: 39.7 kg; lognormal variance with pedigree 0.012, pedigree (1,1,5,5,1)
  properties: dry mass 1 kg, wet mass 1 kg
- electricity, medium voltage: 0.121029, 0.00452831, 0.0575337, 0.998568, 0.0838474, 0.00449417 kWh (6 suppliers, which the file names only by identifier); sum of these 1.27 kWh; lognormal variance with pedigree 0.0126, pedigree (1,3,5,5,1)
- extrusion, plastic film: 0.246 kg; lognormal variance with pedigree 0.0126, pedigree (1,3,5,5,1)
- glass fibre reinforced plastic, polyamide, injection moulded: 5.27 kg; lognormal variance with pedigree 0.012, pedigree (1,1,5,5,1)
  properties: carbon content, fossil 0.446018, dry mass 1 kg, wet mass 1 kg
- isopropanol: 0.0208 kg; lognormal variance with pedigree 0.0126, pedigree (1,3,5,5,1)
  properties: carbon content, fossil 0.6, dry mass 1 kg, heating value, net 34.3 MJ, wet mass 1 kg
- metal working factory: 2.32e-8 unit; lognormal variance with pedigree 0.3146, pedigree (2,4,5,5,1)
- nylon 6: 0.0146 kg; lognormal variance with pedigree 0.0126, pedigree (1,3,5,5,1)
  properties: carbon content, fossil 0.637168, dry mass 1 kg, heating value, net 30.9 MJ, wet mass 1 kg
- polyethylene, high density, granulate: 0.246 kg; lognormal variance with pedigree 0.0126, pedigree (1,3,5,5,1)
  properties: carbon content, fossil 0.857143, dry mass 1 kg, heating value, net 42.47 MJ, wet mass 1 kg
- powder coat, aluminium sheet: 9.8 m2; lognormal variance with pedigree 0.0126, pedigree (1,3,5,5,1)
- reinforcing steel: 0.516 kg; lognormal variance with pedigree 0.0126, pedigree (1,3,5,5,1)
  properties: carbon content, fossil 0.004, dry mass 1 kg, wet mass 1 kg
- section bar extrusion, aluminium: 38 kg; lognormal variance with pedigree 0.012, pedigree (1,1,5,5,1)
- section bar rolling, steel: 0.975 kg; lognormal variance with pedigree 0.012, pedigree (1,1,5,5,1)
- steel, chromium steel 18/8, hot rolled: 0.457 kg; lognormal variance with pedigree 0.012, pedigree (1,1,5,5,1)
  properties: carbon content, fossil 0.0008, dry mass 1 kg, wet mass 1 kg
- synthetic rubber: 4.87 kg; lognormal variance with pedigree 0.0126, pedigree (1,3,5,5,1)
  properties: carbon content, fossil 0.871949, dry mass 1 kg, heating value, net 26.42 MJ, wet mass 1 kg
- waste plastic, mixture: -0.0125348, -0.0877502, -0.00032849, -0.000345927, -6.33406e-5, -0.000837524, -0.000139751 kg (7 suppliers, which the file names only by identifier); sum of these -0.102 kg; lognormal variance with pedigree 0.0126, pedigree (1,3,1,5,1)
  properties: carbon content, fossil 0.747344, dry mass 0.847 kg, heating value, net 30.79 MJ, water content 0.180638, wet mass 1 kg
- waste polyethylene/polypropylene product: -0.246 kg; lognormal variance with pedigree 0.0126, pedigree (1,3,1,5,1)
  properties: carbon content, fossil 0.748045, dry mass 0.847 kg, heating value, net 42.47 MJ, water content 0.180638, wet mass 1 kg

## Sampling procedure
Company documentation, measurements

## Extrapolations
see Geography This dataset has been copied from an original dataset covering the geography RER. The uncertainty has been adjusted accordingly.

## Review by Rolf Frischknecht 2007-11-07
passed
