# cement, all types to generic market for cement, unspecified

Dataset: EcoSpold 2, unit process
Geography: US
Time period: 2013-01-01 to 2022-12-31
Technology level: current
Classification: ISIC rev.4 ecoinvent: 2394:Manufacture of cement, lime and plaster
Scenario: Business-as-Usual
System model: Substitution, consequential, long-term
Generated by: Lucia Valsasina
Database: ecoinvent
isCopyrightProtected: true
accessRestrictedTo: 1

## General comment
This is a linking (transfering) activity which links the specific cement to the generic market for cement, unspecified.

## Included activities start
The activity starts with the reception of a specific cement.

## Included activities end
The activity ends with cement, unspecified which is supplied to the generic market for cement, unspecified.

## Reference product
- cement, unspecified: 1 kg; By-product classification allocatable product; CPC 374: Plaster, lime and cement
  production volume 1.78e10 kg
  properties: carbon allocation 0 kg, carbon content 0, carbon content, fossil 0, carbon content, non-fossil 0, dry mass 1 kg, price 0.0615 EUR2005, water content 0, water in wet mass 0 kg, wet mass 1 kg

## Inputs from technosphere
- cement, Portland: 0.97 kg; lognormal variance with pedigree 0.0006, pedigree (1,1,1,1,1)
  properties: dry mass 1 kg, wet mass 1 kg
- cement, type I (SM): 0.018 kg
  properties: dry mass 1 kg, wet mass 1 kg
- cement, type I-PM: 0.009 kg
  properties: dry mass 1 kg, wet mass 1 kg
- cement, type IP/P: 0.001 kg
  properties: dry mass 1 kg, wet mass 1 kg
- cement, type IS: 0.001 kg
  properties: dry mass 1 kg, wet mass 1 kg
- cement, type S: 0.001 kg
  properties: dry mass 1 kg, wet mass 1 kg
