# uranium production, centrifuge, enriched 3.0%

Dataset: EcoSpold 2, unit process
Geography: DE
Time period: 1993-01-01 to 2022-12-31
Technology level: current
Classification: EcoSpold01Categories: nuclear power/production
Classification: ISIC rev.4 ecoinvent: 2011:Manufacture of basic chemicals
Tags: ConvertedDataset
Scenario: Business-as-Usual
System model: Substitution, consequential, long-term
Generated by: [System]
Published in: Dones, R. 2007
Database: ecoinvent
isCopyrightProtected: true
accessRestrictedTo: 1

## General comment
This module uses a mix of data, some specific for the URENCO facilities in Germany, the Netherlands, and the United Kingdom taken from environmental reports, some from literature. The plants consume 40 kWh/SWU and the electricity is assumed to be supplied by the local high voltage electricity grid. The factor for the infrastructure requirement is calculated with annual throughput of 1500 t SWU for 30 years operation.
[This dataset was already contained in the ecoinvent database version 2. It was not individually updated during the transfer to ecoinvent version 3. Life Cycle Impact Assessment results may still have changed, as they are affected by changes in the supply chain, i.e. in other datasets. This dataset was generated following the ecoinvent quality guidelines for version 2. It may have been subject to central changes described in the ecoinvent version 3 change report (http://www.ecoinvent.org/database/ecoinvent-version-3/reports-of-changes/), and the results of the central updates were reviewed extensively. The changes added e.g. consistent water flows and other information throughout the database. The documentation of this dataset can be found in the ecoinvent reports of version 2, which are still available via the ecoinvent website. The change report linked above covers all central changes that were made during the conversion process.]
[This dataset is meant to replace the following datasets:
- uranium production, centrifuge, enriched 3.0%, RER, 1993 - 2000]

## Included activities end
The module includes: input of UF6; electricity, diesel, and natural gas used for operation; also taken into account is the material for replacement of centrifuge; water use, lubricant oil, and wastewater treatment; concrete assumed to be used for conditioning of contaminated scrap from decommissioning; transport requirements of operation materials, industrial wastes, and contaminated waste from decommissioning (25% of the reinforced concrete and the great part of metals according to the reference). Radioactive and non-radioactive emissions to air and to water from the operation are also included. The infrastructure requirements are accounted for, though construction and operation data partially refer to different plants rather than to one single unit.

## Geography
US and Western European data.

## Technology
Current technology for uranium enrichment with centrifuge process. There exist datasets for five different enrichment grades: 3.0%, 3.8%, 3.9%, 4.2% and 4.0%

## Parameters
- fraction, cooling water, cooling pond system, to air: 0.032 dimensionless; name fraction_CW_CP_to_air; lognormal variance with pedigree 0.0413, pedigree (2,3,1,3,1)
  Calculated based on literature value (Scown, C.D., 2011, Water Footprint of U.S. Transportation Fuels and supplying information of the article) (Vionnet, S., Quantis Water Database - Technical Report, 2012).
- fraction, cooling water, once-through system, to air: 0.004 dimensionless; name fraction_CW_OT_to_air; lognormal variance with pedigree 0.0413, pedigree (2,3,1,3,1)
  (same comment as for fraction, cooling water, cooling pond system, to air)
- fraction, cooling water, recirculating system, to air: 0.771 dimensionless; name fraction_CW_R_to_air; lognormal variance with pedigree 0.0413, pedigree (2,3,1,3,1)
  (same comment as for fraction, cooling water, cooling pond system, to air)
- fraction, cooling water, to air: 0.3875 dimensionless; name fraction_CW_to_air; = (0.5*fraction_CW_OT_to_air)+(0.5*fraction_CW_R_to_air); lognormal variance with pedigree 0.092025, pedigree (4,4,3,2,4)
  Calculated value based on literature value (see comments of the other parametres present in this dataset) and expert opinion. In the case when no industry/literature data are available about the type of cooling or directly fraction, cooling water, to air specific for the process a default assumption is applied. It is assumed that the once-through cooling system is used in 50% of all cases and recirculating system is used in another 50% of all cases.
- fraction, water, decarbonised, to air: 0.3875 dimensionless; name fraction_WDC_to_air; = fraction_CW_to_air; lognormal variance with pedigree 0.092025, pedigree (4,4,3,2,4)
  Calculated value. See comments in the other parametres present in this dataset. Decarbonised water is considered to be always used as cooling water, thus cooling water fractions to air are applied to all carbonised water input flows to calculate the amount of water consumed in the processes.

## Reference product
- uranium, enriched 3.0%, per separative work unit: 1 unit; By-product classification allocatable product; CPC 33620: Uranium enriched in U235 and its compounds; plutonium and its compounds; alloys, dispersions, ceramic products[…]
  production volume 820000 unit
  properties: carbon allocation 0 kg, carbon content 0, carbon content, fossil 0, carbon content, non-fossil 0, dry mass 1 kg, price 299.346 EUR2005, water content 0, water in wet mass 0 kg, wet mass 1 kg

## Inputs from technosphere
- acetylene: 2.5e-5 kg; lognormal variance with pedigree 0, pedigree (1,1,5,1,1)
  properties: carbon content, fossil 0.923077, dry mass 1 kg, heating value, net 51.2 MJ, wet mass 1 kg
- aluminium, wrought alloy: 0.05 kg; lognormal variance with pedigree 0.12, pedigree (1,1,5,1,1)
  properties: dry mass 1 kg, wet mass 1 kg
- argon, liquid: 0.0018 kg; lognormal variance with pedigree 0, pedigree (1,1,5,1,1)
  properties: dry mass 1 kg, wet mass 1 kg
- brass: 0.0018 kg; lognormal variance with pedigree 0.12, pedigree (1,1,5,1,1)
  properties: dry mass 1 kg, wet mass 1 kg
- chemical, inorganic: 0.0311 kg; lognormal variance with pedigree 0, pedigree (1,1,5,1,1)
  properties: carbon content, fossil 0.003, dry mass 1 kg, wet mass 1 kg
- chemical, organic: 0.00082 kg; lognormal variance with pedigree 0, pedigree (1,1,5,1,1)
  properties: carbon content, fossil 0.628, dry mass 1 kg, heating value, net 19.03 MJ, wet mass 1 kg
- concrete, normal strength: 0.00029 m3; lognormal variance with pedigree 0.12, pedigree (1,1,5,1,1)
  properties: dry mass 2190 kg, water content 0.086758, wet mass 2380 kg
- diesel, burned in diesel-electric generating set, 10MW: 1.28 MJ; lognormal variance with pedigree 0, pedigree (1,1,5,1,1)
  properties: heating value, net 1 MJ
- electricity, medium voltage: 40 kWh; lognormal variance with pedigree 0.01, pedigree (1,1,5,1,1)
- heat, district or industrial, natural gas: 13.68 MJ; lognormal variance with pedigree 0, pedigree (1,1,5,1,1)
  properties: heating value, net 1 MJ
- hydrochloric acid, without water, in 30% solution state: 0.0002 kg; lognormal variance with pedigree 0, pedigree (1,1,5,1,1)
  properties: dry mass 1 kg, heating value, net 3.32 MJ, wet mass 1 kg
- hydrogen peroxide, without water, in 50% solution state: 0.00068 kg; lognormal variance with pedigree 0, pedigree (1,1,5,1,1)
  properties: dry mass 1 kg, heating value, net 7.13 MJ, wet mass 1 kg
- hydrogen, liquid: 1.1e-5 kg; lognormal variance with pedigree 0, pedigree (1,1,5,1,1)
  properties: dry mass 1 kg, heating value, net 120.21 MJ, wet mass 1 kg
- low level radioactive waste: -0.00063 m3
  properties: dry mass 2500 kg, wet mass 2500 kg
- lubricating oil: 0.0092 kg; lognormal variance with pedigree 0, pedigree (1,1,5,1,1)
  properties: carbon content, fossil 0.75, dry mass 1 kg, heating value, net 40.2 MJ, wet mass 1 kg
- methanol: 0.00032 kg; lognormal variance with pedigree 0, pedigree (1,1,5,1,1)
  properties: carbon content, fossil 0.375, dry mass 1 kg, heating value, net 20 MJ, wet mass 1 kg
- municipal solid waste: -0.235 kg
  properties: carbon content, fossil 0.171549, carbon content, non-fossil 0.261655, dry mass 0.771 kg, heating value, net 11.74 MJ, water content 0.297017, wet mass 1 kg
- nitric acid, without water, in 50% solution state: 0.0015 kg; lognormal variance with pedigree 0, pedigree (1,1,5,1,1)
  properties: dry mass 1 kg, wet mass 1 kg
- nitrogen, liquid: 0.00039 kg; lognormal variance with pedigree 0, pedigree (1,1,5,1,1)
  properties: dry mass 1 kg, wet mass 1 kg
- oxygen, liquid: 3.6e-5 kg; lognormal variance with pedigree 0, pedigree (1,1,5,1,1)
  properties: dry mass 1 kg, wet mass 1 kg
- phosphoric acid, fertiliser grade, without water, in 70% solution state: 0.00012 kg; lognormal variance with pedigree 0, pedigree (1,1,5,1,1)
  properties: dry mass 1 kg, wet mass 1 kg
- polyvinylchloride, bulk polymerised: 0.00087 kg; lognormal variance with pedigree 0, pedigree (1,1,5,1,1)
  properties: carbon content, fossil 0.387097, dry mass 1 kg, heating value, net 21.5 MJ, wet mass 1 kg
- soap: 0.00088 kg; lognormal variance with pedigree 0, pedigree (1,1,5,1,1)
  properties: carbon content, non-fossil 0.692237, dry mass 0.87 kg, heating value, net 17.93 MJ, water content 0.149425, wet mass 1 kg
- sodium hydroxide, without water, in 50% solution state: 0.0028 kg; lognormal variance with pedigree 0, pedigree (1,1,5,1,1)
  properties: dry mass 1 kg, heating value, net 3.03 MJ, wet mass 1 kg
- spent anion exchange resin from potable water production: -0.058 kg
  properties: carbon content, fossil 0.654, dry mass 0.5 kg, heating value, net 6.08 MJ, water content 1, wet mass 1 kg
- steel, low-alloyed, hot rolled: 0.15 kg; lognormal variance with pedigree 0.04, pedigree (1,1,5,1,1)
  properties: carbon content, fossil 0.005, dry mass 1 kg, wet mass 1 kg
- uranium enrichment centrifuge facility: 2.22e-8 unit; lognormal variance with pedigree 0.04, pedigree (1,1,5,1,1)
- uranium hexafluoride: 1.63 kg; lognormal variance with pedigree 0, pedigree (1,1,5,1,1)
  properties: dry mass 1 kg, wet mass 1 kg
- waste mineral oil: -0.0024 kg
  properties: carbon content, fossil 0.864444, dry mass 0.9 kg, heating value, net 34.7 MJ, water content 0.111111, wet mass 1 kg
- water, decarbonised: 4 kg; lognormal variance with pedigree 0, pedigree (1,1,5,1,1)
  properties: wet mass 1 kg

## Emissions to nature
- Ethane, 1,1,1,2-tetrafluoro-, HFC-134a [air, non-urban air or from high stacks]: 0.00026 kg; lognormal variance with pedigree 0.02, pedigree (1,1,5,1,1)
- Ethanol [air, non-urban air or from high stacks]: 0.0013 kg; lognormal variance with pedigree 0, pedigree (1,1,5,1,1)
- Hydrogen fluoride [air, non-urban air or from high stacks]: 3.7e-8 kg; lognormal variance with pedigree 0, pedigree (1,1,5,1,1)
- Thorium-234 [air, non-urban air or from high stacks]: 0.00029 kBq; lognormal variance with pedigree 0.04, pedigree (1,1,5,1,1)
- Uranium alpha [air, non-urban air or from high stacks]: 5.8e-5 kBq; lognormal variance with pedigree 0, pedigree (1,1,5,1,1)
- Water [air, unspecified]: 0.00155 m3; lognormal variance with pedigree 0.092025, pedigree (4,4,5,2,4)
- Aluminium III [water, surface water]: 0.0011 kg; lognormal variance with pedigree 0, pedigree (1,1,5,1,1)
- Chromium III [water, surface water]: 3.8e-6 kg; lognormal variance with pedigree 0, pedigree (1,1,5,1,1)
- Copper ion [water, surface water]: 1.3e-6 kg; lognormal variance with pedigree 0, pedigree (1,1,5,1,1)
- Fluoride [water, surface water]: 0.00011 kg; lognormal variance with pedigree 0, pedigree (1,1,5,1,1)
- Hydrocarbons, unspecified [water, surface water]: 6.1e-5 kg; lognormal variance with pedigree 0, pedigree (1,1,5,1,1)
- Nitrate [water, surface water]: 0.0025 kg; lognormal variance with pedigree 0, pedigree (1,1,5,1,1)
- Phosphate [water, surface water]: 0.00034 kg; lognormal variance with pedigree 0, pedigree (1,1,5,1,1)
- Thorium-234 [water, surface water]: 0.0031 kBq; lognormal variance with pedigree 0, pedigree (1,1,5,1,1)
- Uranium alpha [water, surface water]: 8.2e-6 kBq; lognormal variance with pedigree 0, pedigree (1,1,5,1,1)
- Water [water, unspecified]: 0.00245 m3; lognormal variance with pedigree 0.092025, pedigree (4,4,5,2,4)
- Zinc II [water, surface water]: 3.8e-5 kg; lognormal variance with pedigree 0, pedigree (1,1,5,1,1)

## Sampling procedure
Literature

## Extrapolations
This dataset is a copy from an original RER dataset valid for a mix of Germany, the Netherlands, and the United Kingdom.
