# polyvinylchloride production, bulk polymerisation

Dataset: EcoSpold 2, unit process
Geography: RoW
Time period: 1998-01-01 to 2022-12-31
Technology level: current
Classification: ISIC rev.4 ecoinvent: 2013:Manufacture of plastics and synthetic rubber in primary forms
Classification: EcoSpold01Categories: plastics/polymers
Synonyms: PVC
Tags: ConvertedDataset
Scenario: Business-as-Usual
System model: Substitution, consequential, long-term
Generated by: Roland Hischier
Published in: Hischier R. 2007
Database: ecoinvent
isCopyrightProtected: true
accessRestrictedTo: 1

## General comment
see included processes
[This dataset was already contained in the ecoinvent database version 2. It was not individually updated during the transfer to ecoinvent version 3. Life Cycle Impact Assessment results may still have changed, as they are affected by changes in the supply chain, i.e. in other datasets. This dataset was generated following the ecoinvent quality guidelines for version 2. It may have been subject to central changes described in the ecoinvent version 3 change report (http://www.ecoinvent.org/database/ecoinvent-version-3/reports-of-changes/), and the results of the central updates were reviewed extensively. The changes added e.g. consistent water flows and other information throughout the database. The documentation of this dataset can be found in the ecoinvent reports of version 2, which are still available via the ecoinvent website. The change report linked above covers all central changes that were made during the conversion process.]

## Included activities end
Data represent a mix of the two other types of PVC (suspension, emulsion PVC), according to their production volumes, due to a lack of respective data from PlasticsEurope about bulk PVC.

## Technology
see included processes

## Time period
time to which data refer

## Reference product
- polyvinylchloride, bulk polymerised: 1 kg; By-product classification allocatable product; CPC 34730: Polymers of vinyl chloride or other halogenated olefins, in primary forms
  production volume 2.67763 kg
  properties: carbon allocation 0.387097 kg, carbon content 0.387097, carbon content, fossil 0.387097, carbon content, non-fossil 0, dry mass 1 kg, heating value, net 21.5 MJ, price 1.29 EUR2005, water content 0, water in wet mass 0 kg, wet mass 1 kg

## Inputs from technosphere
- polyvinylchloride, emulsion polymerised: 0.12766 kg; lognormal variance with pedigree 0.0126, pedigree (2,1,5,5,1)
  properties: carbon content, fossil 0.387097, dry mass 1 kg, heating value, net 21.5 MJ, wet mass 1 kg
- polyvinylchloride, suspension polymerised: 0.87234 kg; lognormal variance with pedigree 0.0126, pedigree (2,1,5,5,1)
  properties: carbon content, fossil 0.387097, dry mass 1 kg, heating value, net 21.5 MJ, wet mass 1 kg

## Extrapolations
see included processes This dataset has been copied from an original dataset covering the geography RER. The uncertainty has been adjusted accordingly.

## Review by Jürgen Sutter 2009-02-06
passed.
