# mine construction, underground, hard coal

Dataset: EcoSpold 2, unit process
Geography: RoW
Time period: 1980-01-01 to 2022-12-31
Technology level: current
Classification: ISIC rev.4 ecoinvent: 4290:Construction of other civil engineering projects
Classification: EcoSpold01Categories: hard coal/production
Tags: ConvertedDataset
Scenario: Business-as-Usual
System model: Substitution, consequential, long-term
Generated by: Christian Bauer
Published in: Röder, A. 2004
Database: ecoinvent
isCopyrightProtected: true
accessRestrictedTo: 1

## General comment
This dataset represents the construction of an underground mine for mining hard coal. Life time is assumed to be the same as for opencast mines for mining lignite. Thus, an average life time of 30 years is considered for machinery.
Data represent first approximations due to the insufficient availability of data. The estimates are based on data about a few underground mines: Donetsk/Kuznetsk (former UdSSR), Trimmelkam, Schmitzberg (Austria) and Tahmoor (Australia). Hence, only figures per tone hard coal were given in literature and no information about average annual production of hard coal was available. Due to these facts a total production of 100 million tons has been assumed to represent a worldwide average (excluding small mines in China). This estimation includes both opencast and underground mines; therefore the total production shall be seen more as a normalization factor than an actual average value for the production of underground mines.
Due to the fact that hard coal has to be treated, higher figures for infrastructure are considered. It has to be considered that this dataset is based on few data about underground mines thus it may not reflect specific mines. Even with a broader database it would not have been possible to calculate assured mean values. This is due to the fact that there are big differences between mines and complete data of several hundred mines would have been required.
[This dataset was already contained in the ecoinvent database version 2. It was not individually updated during the transfer to ecoinvent version 3. Life Cycle Impact Assessment results may still have changed, as they are affected by changes in the supply chain, i.e. in other datasets. This dataset was generated following the ecoinvent quality guidelines for version 2. It may have been subject to central changes described in the ecoinvent version 3 change report (http://www.ecoinvent.org/database/ecoinvent-version-3/reports-of-changes/), and the results of the central updates were reviewed extensively. The changes added e.g. consistent water flows and other information throughout the database. The documentation of this dataset can be found in the ecoinvent reports of version 2, which are still available via the ecoinvent website. The change report linked above covers all central changes that were made during the conversion process.]

## Included activities start
From unspecified land forseen for an underground mine for hard coal mining.

## Included activities end
This activity ends with an underground mine unit for hard coal mining. This dataset includes machinery and equipment with a life time of 30 years because this information is not seperated in the literature given. It also includes requirements for prospecting.Concrete for filling the pit after abandonment of the mine is considered. Land use is included as well. In this dataset explosives are considered via blasting.

## Technology
No specific information available.

## Reference product
- mine infrastructure, underground, hard coal: 1 unit; By-product classification allocatable product; CPC 53261: Mining constructions
  production volume 919.48 unit
  properties: carbon allocation 0 kg, carbon content 0, price 1.38874e8 EUR2005

## Inputs from technosphere
- blasting: 3e6 kg; lognormal variance with pedigree 0.3, pedigree (1,1,5,1,1)
- concrete, normal strength: 91000 m3; lognormal variance with pedigree 0.3, pedigree (1,1,5,1,1)
  properties: dry mass 2190 kg, water content 0.086758, wet mass 2380 kg
- copper, cathode: 60000 kg; lognormal variance with pedigree 0.65, pedigree (1,1,5,1,1)
  properties: dry mass 1 kg, wet mass 1 kg
- diesel, burned in building machine: 1.8e8 MJ; lognormal variance with pedigree 0.3, pedigree (1,1,5,1,1)
  properties: heating value, net 1 MJ
- electricity, medium voltage: 195205, 370952, 221673, 4463.78, 21274.4, 24980.3, 6480.45, 1.5011e6, 50228.5, 2.47506e6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 kWh (46 suppliers, which the file names only by identifier); sum of these 1.2e7 kWh; lognormal variance with pedigree 0.3, pedigree (1,1,5,1,1)
- heat, district or industrial, other than natural gas: 1.8e8 MJ; lognormal variance with pedigree 0.3, pedigree (1,1,5,1,1)
  properties: heating value, net 1 MJ
- plywood: 157.573, 7.42663 m3 (2 suppliers, which the file names only by identifier); sum of these 165 m3; lognormal variance with pedigree 0.3, pedigree (1,1,5,1,1)
  properties: carbon content, fossil 0.09783, carbon content, non-fossil 0.409818, dry mass 768.6 kg, heating value, net 11688.9 MJ, price 400 EUR2005, water content 0.070778, wet mass 823 kg
- reinforcing steel: 1.5e7 kg; lognormal variance with pedigree 0.65, pedigree (1,1,5,1,1)
  properties: carbon content, fossil 0.004, dry mass 1 kg, wet mass 1 kg
- sawnwood, hardwood, raw, dried (u=20%): 112413, 276587 m3 (2 suppliers, which the file names only by identifier); sum of these 389000 m3; lognormal variance with pedigree 0.3, pedigree (1,1,5,1,1)
  properties: carbon content, non-fossil 0.494, dry mass 650 kg, heating value, net 9410.32 MJ, water content 0.2, wet mass 780 kg
- steel, low-alloyed, hot rolled: 3e6 kg; lognormal variance with pedigree 0.65, pedigree (1,1,5,1,1)
  properties: carbon content, fossil 0.005, dry mass 1 kg, wet mass 1 kg
- waste wood, untreated: -287.705, -5460.7, -8617.95, -72446.8, -678.028, -454.838, -1904.38, -49.5715 kg (8 suppliers, which the file names only by identifier); sum of these -89900 kg; lognormal variance with pedigree 0.3, pedigree (1,1,1,1,1)
  properties: carbon content, non-fossil 0.48632, dry mass 0.8 kg, heating value, net 13.99 MJ, water content 0.25, wet mass 1 kg

## Inputs from nature
- Occupation, industrial area [natural resource, land]: 4.44e7 m2*year; lognormal variance with pedigree 0.65, pedigree (1,1,5,1,1)
- Transformation, from unspecified [natural resource, land]: 2.22e6 m2; lognormal variance with pedigree 0.65, pedigree (1,1,5,1,1)
- Transformation, to industrial area [natural resource, land]: 2.22e6 m2; lognormal variance with pedigree 0.65, pedigree (1,1,5,1,1)

## Sampling procedure
literature

## Review by Christian Bauer 2004-05-28
passed

## Review by Roland Hischier 2011-09-22
Transfer of documentation done.
