# passenger car production, petrol/natural gas

Dataset: EcoSpold 2, unit process
Geography: GLO
Time period: 2000-01-01 to 2022-12-31
Technology level: modern
Classification: ISIC rev.4 ecoinvent: 2910:Manufacture of motor vehicles
Scenario: Business-as-Usual
System model: Substitution, consequential, long-term
Generated by: Hans-Jörg Althaus
Published in: H.-J. Althaus 2010
Database: ecoinvent
isCopyrightProtected: true
accessRestrictedTo: 1

## General comment
This dataset describes the production of a petrol passenger car of compact size. The entries are based on a per kg basis. The model is optimized for a vehicle of about 1234kg. It is subdivided in two modules, the glider and the drivetrain. Each module contains the specific materialization and production efforts and emissions. The specific end of life treatment of each module is covered in the respective dataset. The treatment of the used passenger car only includes the manual dismantling of the car in the various modules.

## Included activities start
The dataset takes as input the two modules (glider and drivetrain) which build the vehicle. The production efforts, emissions and manufacturing infrastructure are in the respective modules.

## Included activities end
The activity ends with the assembly of the car and the dismantling of the vehicle at the end of its life.

## Technology
The dataset is based on averages over passenger car technologies spanning from 2000 to 2010 which are expected to be representative up to 2015.

## Parameters
- glider weight: 913 kg
- powertrain weight: 321 kg

## Reference product
- passenger car, petrol/natural gas: 1 kg; By-product classification allocatable product; CPC 49113: Motor cars and other motor vehicles principally designed for the transport of persons (except public-transport[…]
  production volume 3.6e10 kg
  properties: carbon allocation 0 kg, carbon content 0, price 11.1 EUR2005

## Inputs from technosphere
- glider, passenger car: 0.73987 kg; lognormal variance with pedigree 0.0032, pedigree (2,3,5,4,2)
- internal combustion engine, passenger car: 0.26013 kg; lognormal variance with pedigree 0.0032, pedigree (2,3,5,4,2)
- manual dismantling of used passenger car with internal combustion engine: 1 unit; lognormal variance with pedigree 0.0124, pedigree (2,3,5,4,3)
- waste glass: -2.79205e-5, -0.000197069, -8.22717e-5, -4.47083e-6, -0.00406148, -0.0201503, -0.00213815, -1.83862e-5 kg (8 suppliers, which the file names only by identifier); sum of these -0.02668 kg; lognormal variance with pedigree 0.0124, pedigree (2,3,3,4,3)
  properties: dry mass 1 kg, heating value, net 0.05 MJ, wet mass 1 kg
- waste mineral oil: -1.71718e-5, -0.00181619, -0.000693639 kg (3 suppliers, which the file names only by identifier); sum of these -0.002527 kg; lognormal variance with pedigree 0.0124, pedigree (2,3,3,4,3)
  properties: carbon content, fossil 0.864444, dry mass 0.9 kg, heating value, net 34.7 MJ, water content 0.111111, wet mass 1 kg
- waste rubber, unspecified: -0.0184478, -0.000774435, -0.0184478 kg (3 suppliers, which the file names only by identifier); sum of these -0.03767 kg; lognormal variance with pedigree 0.0124, pedigree (2,3,3,4,3)
  properties: carbon content, fossil 0.853, dry mass 1 kg, heating value, net 27.19 MJ, wet mass 1 kg

## Sampling procedure
Vehicle structure based on current commercially available vehicles.

## Extrapolations
The data is expected to be representative up to 2015 since no substantial changes could be observed in the materialisation of passenenger cars between 2000 and 2010. It is not expected that major changes will occur until 2015 in commercially available passenger cars.

## Review by Christian Bauer 2012-06-28
passed
