# amine oxide production

Dataset: EcoSpold 2, unit process
Geography: RER
Time period: 2015-01-01 to 2022-12-31
Technology level: current
Classification: ISIC rev.4 ecoinvent: 2023:Manufacture of soap and detergents, cleaning and polishing preparations, pe
Synonyms: N-oxide; amine-N-oxide
Scenario: Business-as-Usual
System model: Substitution, consequential, long-term
Generated by: Lucia Valsasina
Database: ecoinvent
isCopyrightProtected: true
accessRestrictedTo: 1

## General comment
Amine oxides are surfactants and are therefore used for cleaning products and in the personal care industry. These products are used as foam stabilizers, for thickening, emulsification, conditioning, and as emollients. These are usually used in a concentration up to 10%. Amine oxides are always sold in solution state, usually in water with concentration between 25% and 35% (OECD 2006).
The annual production volume of amine oxides is of 26 thousand tonnes, 16 thousand tonnes and 6.8 thousand tonnes in the US, EU, Japan respectively (OECD 2006).
Reference(s):
Gendorf (2016) Umwelterklärung 2015, Werk Gendorf Industriepark, www.gendorf.de
OECD SIDS 2006. SIDS Initial Assessment Report For SIAM 22 Paris, France, 18-21 April 2006. Retrieved from: webnet.oecd.org/hpv/ui/handler.axd?id=b50d7d1a-50d1-488a-97e4-9cc71005b1a1, accessed 2 February 2017
Roose et al. 2015. Amines, Aliphatic. In Ullmann's Encyclopedia of Industrial Chemistry, Electronic Release, pp.1-55. Wiley-VCH, Weinheim.
For more information on the model please refer to the dedicate ecoinvent report, access it in the Report section of ecoQuery (http://www.ecoinvent.org/login-databases.html)

## Included activities start
The activity starts when the raw materials enter the process.

## Included activities end
Materials entering the process are included as well as energy uses, infrastructure and emissions.

## Geography
The inputs to the process are calculated based on stoichiometry and literature data, they are therefore considered to be valid for the chosen geography. The inputs of heat, electricity, water, factory and nitrogen are mostly taken as average of industry data. Industry data values are a 5-year average of data (2011 - 2015) published by the Gendorf factory (Gendorf, 2016, Umwelterklärung, www.gendorf.de), (Gendorf, 2015, Umwelterklärung, www.gendorf.de), (Gendorf, 2014, Umwelterklärung, www.gendorf.de). The Gendorf factory is based in Germany, it produces a wide range of chemical substances. The factory produced 1657400 tonnes of chemical substances in the year 2015 (Gendorf, 2016, Umwelterklärung, www.gendorf.de) and 740000 tonnes of intermediate products. As, according to Cefic Report of the chemical industry (Cefic 2016. Facts and figures 2016 of the European chemical industry. Accessible at: http://www.cefic.org/Facts-and-Figures/Chemicals-Industry-Profile/, accessed 30/06/2017), Germany covers 28.5% of EU chemical generated sales in 2015, we assumed these values to be representative of the RER geography.

## Technology
Amine oxides are all surfactants because of their similar structure. All amine oxides are formed by an amine oxide polar “head” and an alkyl hydrophobic “tail”. The alkyl chain has between 8 and 20 C atoms (OECD 2006). This activity describes an amine oxide with C14. The product is the result of the reaction of dodecanol and dimethylamine (Roose et al. 2015). Hydrogen peroxide is used as oxidizing agent.
Chemical reaction:
C12H26O + (CH3)2NH + H2O2 -> C14H31NO + 2H2O
This inventory representing production of a particular chemical compound is at least partially based on a generic model on the production of chemicals. The data generated by this model have been improved by compound-specific data when available.
The model on production of chemicals is using specific industry or literature data wherever possible and more generic data on chemical production processes to fill compound-specific data gaps when necessary. The basic principles of the model have been published in literature (Hischier 2005, Establishing Life Cycle Inventories of Chemicals Based on Differing Data Availability). The model has been updated and extended with newly available data from the chemical industry.
In the model, unreacted fractions are treated in a waste treatment process, and emissions reported are after a waste treatment process that is included in the scope of this dataset. For volatile reactants, a small level of evaporation is assumed. Solvents and catalysts are mostly recycled in closed-loop systems within the scope of the dataset and reported flows are for losses from this system.
The main source of information for the values for heat, electricity, water (process and cooling), nitrogen, chemical factory is industry data from Gendorf. The values are a 5-year average of data (2011 - 2015) published by the Gendorf factory (Gendorf, 2016, Umwelterklärung, www.gendorf.de), (Gendorf, 2015, Umwelterklärung, www.gendorf.de), (Gendorf, 2014, Umwelterklärung, www.gendorf.de). The Gendorf factory is based in Germany, it produces a wide range of chemical substances. The factory produced 1657400 tonnes of chemical substances in the year 2015 (Gendorf, 2016, Umwelterklärung, www.gendorf.de) and 740000 tonnes of intermediate products.
Reference(s):
Hischier, R. (2005) Establishing Life Cycle Inventories of Chemicals Based on Differing Data Availability (9 pp). The International Journal of Life Cycle Assessment, Volume 10, Issue 1, pp 59–67. 10.1065/lca2004.10.181.7
Gendorf (2016) Umwelterklärung 2015, Werk Gendorf Industriepark, www.gendorf.de
OECD SIDS 2006. SIDS Initial Assessment Report For SIAM 22 Paris, France, 18-21 April 2006. Retrieved from: webnet.oecd.org/hpv/ui/handler.axd?id=b50d7d1a-50d1-488a-97e4-9cc71005b1a1, accessed 2 February 2017
Roose et al. 2015. Amines, Aliphatic. In Ullmann's Encyclopedia of Industrial Chemistry, Electronic Release, pp.1-55. Wiley-VCH, Weinheim.
For more information on the model please refer to the dedicate ecoinvent report, access it in the Report section of ecoQuery (http://www.ecoinvent.org/login-databases.html)

## Time period
The activity is based on stoichiometry and literature data, it is therefore considered not to change significantly over time in terms of inputs. The inputs of heat, electricity, water, factory and nitrogen are mostly taken as average of industry data. Industry data values are a 5-year average of data (2011 - 2015) published by the Gendorf factory (Gendorf, 2016, Umwelterklärung, www.gendorf.de), (Gendorf, 2015, Umwelterklärung, www.gendorf.de), (Gendorf, 2014, Umwelterklärung, www.gendorf.de). The Gendorf factory is based in Germany, it produces a wide range of chemical substances. The factory produced 1657400 tonnes of chemical substances in the year 2015 (Gendorf, 2016, Umwelterklärung, www.gendorf.de) and 740000 tonnes of intermediate products. The time period is therefore set based on the years from Gendorf reference.

## Reference product
- amine oxide: 1 kg; By-product classification allocatable product; CPC 35310: Organic surface active agents, except soap
  production volume 1.6e7 kg
  properties: carbon allocation 0.732996 kg, carbon content 0.732996, carbon content, fossil 0.366498, carbon content, non-fossil 0.366498, dry mass 1 kg, price 4.50332 EUR2005, water content 0, water in wet mass 0 kg, wet mass 1 kg

## Inputs from technosphere
- chemical factory, organics: 4e-10 unit; lognormal variance with pedigree 0.309225, pedigree (2,3,2,2,3)
- dodecanol: 0.859308 kg; lognormal variance with pedigree 0.009825, pedigree (2,3,2,2,3)
  properties: carbon content, fossil 0.386749, carbon content, non-fossil 0.386749, dry mass 1 kg, heating value, net 40.34 MJ, wet mass 1 kg
- electricity, medium voltage: 0.416 kWh; lognormal variance with pedigree 0.009825, pedigree (2,3,2,2,3)
- heat, district or industrial, natural gas: 2.15 MJ; lognormal variance with pedigree 0.009825, pedigree (2,3,2,2,3)
  properties: heating value, net 1 MJ
- heat, from steam, in chemical industry: 0.2 MJ; lognormal variance with pedigree 0.009825, pedigree (2,3,2,2,3)
  properties: heating value, net 1 MJ
- hydrogen peroxide, without water, in 50% solution state: 0.156861 kg; lognormal variance with pedigree 0.009825, pedigree (2,3,2,2,3)
  properties: dry mass 1 kg, heating value, net 7.13 MJ, wet mass 1 kg
- methylamine: 0.143223 kg; lognormal variance with pedigree 0.009825, pedigree (2,3,2,2,3)
  properties: carbon content, fossil 0.386735, dry mass 1 kg, heating value, net 31.23 MJ, wet mass 1 kg
- nitrogen, liquid: 0.019 kg; lognormal variance with pedigree 0.009825, pedigree (2,3,2,2,3)
  properties: dry mass 1 kg, wet mass 1 kg
- tap water: 0.026 kg; lognormal variance with pedigree 0.009825, pedigree (2,3,2,2,3)
  properties: carbon content, fossil 0.00178991, dry mass 0.000337476 kg, water content 2962.17, wet mass 1 kg
- wastewater, average: -2.63381e-6, -6.61915e-8 m3 (2 suppliers, which the file names only by identifier); sum of these -2.7e-6 m3; lognormal variance with pedigree 0.009825, pedigree (2,3,1,2,3)
  properties: carbon content, non-fossil 0.194039, dry mass 0.346837 kg, water content 2882.2, wet mass 1000 kg

## Inputs from nature
- Water, cooling, unspecified natural origin [natural resource, in water]: 0.0164 m3; lognormal variance with pedigree 0.009825, pedigree (2,3,2,2,3)
- Water, river [natural resource, in water]: 0.00086 m3; lognormal variance with pedigree 0.009825, pedigree (2,3,2,2,3)
- Water, well, in ground [natural resource, in water]: 0.00083 m3; lognormal variance with pedigree 0.009825, pedigree (2,3,2,2,3)

## Emissions to nature
- Amine oxides [air, unspecified]: 0.00502513 kg; lognormal variance with pedigree 0.0104, pedigree (2,3,2,4,3)
- Carbon dioxide, fossil [air, unspecified]: 0.115684 kg; lognormal variance with pedigree 0.0104, pedigree (2,3,2,4,3)
- Methylamine [air, unspecified]: 0.000716116 kg; lognormal variance with pedigree 0.0104, pedigree (2,3,2,4,3)
- Nitrogen [air, unspecified]: 0.019 kg; lognormal variance with pedigree 0.009825, pedigree (2,3,2,2,3)
- Water [air, unspecified]: 0.0014 m3; lognormal variance with pedigree 0.009825, pedigree (2,3,2,2,3)
- Dodecanol [water, unspecified]: 0.00214827 kg; lognormal variance with pedigree 0.0104, pedigree (2,3,2,4,3)
- Hydrogen peroxide [water, unspecified]: 0.000392152 kg; lognormal variance with pedigree 0.0104, pedigree (2,3,2,4,3)
- Water [water, unspecified]: 0.0167 m3; lognormal variance with pedigree 0.009825, pedigree (2,3,2,2,3)

## Sampling procedure
Literature data and stochiometric calculation.

## Review by Emilia Moreno Ruiz 2017-08-10
This dataset was additionally reviewed in a separate review process by Eric Johnson of Atlantic Consulting as well as Emilia Moreno Ruiz and Gregor Wernet of ecoinvent.
