# treatment of used vegetable cooking oil, purification

Dataset: EcoSpold 2, unit process
Geography: CH
Time period: 2003-01-01 to 2022-12-31
Technology level: current
Classification: ISIC rev.4 ecoinvent: 3830:Materials recovery
Classification: EcoSpold01Categories: biomass/fuels
Synonyms: straight vegetable oil; SVO; pure vegetable oil; vegetable oil
Tags: ConvertedDataset
Scenario: Business-as-Usual
System model: Substitution, consequential, long-term
Share of production covered: 0 %
Generated by: Edgard Gnansounou
Published in: Jungbluth N. 2007
Database: ecoinvent
isCopyrightProtected: true
accessRestrictedTo: 1

## General comment
Treated vegetable oil consists of 93.7% triglycerides and 6.7% fatty acid methyl ester. Process refers to the acid-catalysed esterification of free fatty acids and includes water removal, glycerine washing and methanol recovery.
[This dataset was already contained in the ecoinvent database version 2. It was not individually updated during the transfer to ecoinvent version 3. Life Cycle Impact Assessment results may still have changed, as they are affected by changes in the supply chain, i.e. in other datasets. This dataset was generated following the ecoinvent quality guidelines for version 2. It may have been subject to central changes described in the ecoinvent version 3 change report (http://www.ecoinvent.org/database/ecoinvent-version-3/reports-of-changes/), and the results of the central updates were reviewed extensively. The changes added e.g. consistent water flows and other information throughout the database. The documentation of this dataset can be found in the ecoinvent reports of version 2, which are still available via the ecoinvent website. The change report linked above covers all central changes that were made during the conversion process.]

## Included activities end
This process includes the collection of waste vegetable oil and delivery to the treatment plant, treatment for impurities and water removal, conditioning and storage of the oil. Treatment of effluents is taken into account. Includes also the gross calorific value of the biomass and the carbon dioxide credit. System boundary is at the oil refining facility.

## Geography
Data is mostly from one literature source (US), adapted to vegetable oil treatment in CH.

## Technology
Acid-catalysed esterification of free-fatty acids.

## Time period
Data from 2003, existing technology

## Parameters
- fraction, process water, to air: 0.15 dimensionless; name fraction_PW_to_air; lognormal variance with pedigree 0.092025, pedigree (4,4,3,2,4)
  Literature value. In case when no industry/process specific data are available, default evaporation fraction value is used. This value is 15% and is based on literature (Statistics Canada, 2007 & Shaffer, K.H., 2008, Consumptive water use in the Great Lakes Basin, USGS & Shiklomanov, 2003, World Water Resources at the Beginning of the 21st Century) and has been approved by an expert.
- fraction, tap water, to air: 0.15 dimensionless; name fraction_TW_to_air; = fraction_PW_to_air; lognormal variance with pedigree 0.092025, pedigree (4,4,3,2,4)
  Calculated value. See comment in the other parametres present in this dataset. Tap water is considered to be always used as process water, thus process water fractions to air are applied to all tap water input flows to calculate the amount of water consumed in the processes.

## Reference product
- used vegetable cooking oil: -1 kg; By-product classification Recyclable; CPC 39120: Bran and other residues from the working of cereals or legumes; vegetable materials and vegetable waste, veget[…]
  production volume 1.4e7 kg
  properties: carbon allocation 0.75 kg, carbon content 0.75, carbon content, fossil 0, carbon content, non-fossil 0.75, dry mass 1 kg, heating value, net 38.4 MJ, price 0 EUR2005, water content 0, water in wet mass 0 kg, wet mass 1 kg

## Inputs from technosphere
- electricity, medium voltage: 0.0503908 kWh; lognormal variance with pedigree 0.096025, pedigree (4,5,5,2,4)
- glycerine: 0.104741 kg; lognormal variance with pedigree 0.090025, pedigree (4,4,5,2,4)
  properties: carbon content, non-fossil 0.391304, dry mass 1 kg, heating value, net 18 MJ, wet mass 1 kg
- heat, district or industrial, natural gas: 0.766753 MJ; lognormal variance with pedigree 0.096025, pedigree (4,5,5,2,4)
  properties: heating value, net 1 MJ
- methanol: 0.0266812 kg; lognormal variance with pedigree 0.090025, pedigree (4,4,5,2,4)
  properties: carbon content, fossil 0.375, dry mass 1 kg, heating value, net 20 MJ, wet mass 1 kg
- sulfuric acid: 0.00208292 kg; lognormal variance with pedigree 0.090025, pedigree (4,4,5,2,4)
  properties: dry mass 1 kg, wet mass 1 kg
- tap water: 0.139141 kg; lognormal variance with pedigree 0.052625, pedigree (4,4,5,2,4)
  properties: carbon content, fossil 0.00178991, dry mass 0.000337476 kg, water content 2962.17, wet mass 1 kg
- used vegetable cooking oil, purified: -0.991867 kg
  properties: carbon content, fossil 0.003, carbon content, non-fossil 0.747, dry mass 1 kg, heating value, net 38.4 MJ, price 0.362 EUR2005, wet mass 1 kg
- vegetable oil esterification facility: 9.01696e-10 unit; lognormal variance with pedigree 0.326025, pedigree (4,5,5,2,1)
- wastewater, average: -0.00011827 m3; lognormal variance with pedigree 0.298025, pedigree (5,5,1,2,5)
  properties: carbon content, non-fossil 0.194039, dry mass 0.346837 kg, mass concentration, TOC 0.1091 kg/m3, mass concentration, calcium 0.039453 kg/m3, mass concentration, chlorine 0.030031 kg/m3, mass concentration, hydrogen 0.013365 kg/m3, mass concentration, nitrogen 0.031015 kg/m3, mass concentration, oxygen 0.069824 kg/m3, mass concentration, sodium 0.06456 kg/m3, mass concentration, sulfur 0.015602 kg/m3, water content 2882.2, wet mass 1000 kg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

## Inputs from nature
- Carbon dioxide, in air [natural resource, in air]: 2.82037 kg; lognormal variance with pedigree 0.026, pedigree (1,5,5,1,3)

## Emissions to nature
- Carbon dioxide, non-fossil [air, urban air close to ground]: 0.165215 kg; lognormal variance with pedigree 0.1786, pedigree (4,5,5,5,5)
- Water [air, unspecified]: 2.08712e-5 m3; lognormal variance with pedigree 0.092025, pedigree (4,4,5,2,4)
- Oils, non-fossil [soil, industrial]: 0.000495933 kg; lognormal variance with pedigree 0.0862, pedigree (4,5,5,5,3)
- BOD5, Biological Oxygen Demand [water, surface water]: 0.00347153 kg; lognormal variance with pedigree 0.0862, pedigree (4,5,5,5,3)
- COD, Chemical Oxygen Demand [water, surface water]: 0.00347153 kg; lognormal variance with pedigree 0.0862, pedigree (4,5,5,5,3)
- DOC, Dissolved Organic Carbon [water, surface water]: 0.000429091 kg; lognormal variance with pedigree 0.0862, pedigree (4,5,5,5,3)
- TOC, Total Organic Carbon [water, surface water]: 0.000429091 kg; lognormal variance with pedigree 0.0862, pedigree (4,5,5,5,3)

## Sampling procedure
Data mostly from one literature source (US).

## Review by Niels Jungbluth 2006-10-17
Passed.
none
