# transport, pipeline, onshore, petroleum

Dataset: EcoSpold 2, unit process
Geography: RoW
Time period: 1976-01-01 to 2022-12-31
Technology level: current
Classification: EcoSpold01Categories: oil/production
Classification: ISIC rev.4 ecoinvent: 4930:Transport via pipeline
Tags: ConvertedDataset
Scenario: Business-as-Usual
System model: Substitution, consequential, long-term
Generated by: Niels Jungbluth
Published in: Jungbluth, N. 2007
Database: ecoinvent
isCopyrightProtected: true
accessRestrictedTo: 1

## General comment
Calculation for energy use. There are differences depending on diameter and difference of height.
[This dataset was already contained in the ecoinvent database version 2. It was not individually updated during the transfer to ecoinvent version 3. Life Cycle Impact Assessment results may still have changed, as they are affected by changes in the supply chain, i.e. in other datasets. This dataset was generated following the ecoinvent quality guidelines for version 2. It may have been subject to central changes described in the ecoinvent version 3 change report (http://www.ecoinvent.org/database/ecoinvent-version-3/reports-of-changes/), and the results of the central updates were reviewed extensively. The changes added e.g. consistent water flows and other information throughout the database. The documentation of this dataset can be found in the ecoinvent reports of version 2, which are still available via the ecoinvent website. The change report linked above covers all central changes that were made during the conversion process.]

## Included activities end
Energy use for pumping and emissions of oil due to accidents.

## Geography
Data investigated in RER

## Technology
Operation of crude oil pipelines by electricity.

## Time period
Emissions published in 1992. Transport modes investigated for 1994.

## Reference product
- transport, pipeline, onshore, petroleum: 1 metric ton*km; By-product classification allocatable product; CPC 65131: Transport services via pipeline of petroleum and natural gas
  production volume 2.67763 metric ton*km
  properties: carbon allocation 0 kg, carbon content 0, price 0.0047382 EUR2005

## Inputs from technosphere
- electricity, medium voltage: 0.00190596, 7.13119e-5, 0.000906042, 0.0157255, 0.00132043, 7.07743e-5 kWh (6 suppliers, which the file names only by identifier); sum of these 0.02 kWh; lognormal variance with pedigree 0.042, pedigree (1,1,5,5,1)
- pipeline, petroleum: 9.46e-9 km; lognormal variance with pedigree 0.122, pedigree (1,1,5,5,1)

## Emissions to nature
- Oils, unspecified [soil, unspecified]: 1.07e-5 kg; lognormal variance with pedigree 0.042, pedigree (1,1,5,5,1)

## Sampling procedure
Literature.

## Extrapolations
From single data to global situation. This dataset has been copied from an original dataset covering the geography RER. The uncertainty has been adjusted accordingly.

## Review by Michael Spielmann (obsolete) 2003-07-04
passed.
