# green manure growing, organic, until January

Dataset: EcoSpold 2, unit process
Geography: RoW
Time period: 1996-01-01 to 2022-12-31
Technology level: current
Classification: ISIC rev.4 ecoinvent: 0161:Support activities for crop production
Synonyms: catch crop
Scenario: Business-as-Usual
System model: Substitution, consequential, long-term
Generated by: Thomas Nemecek
Published in: Nemecek, T. 2007
Database: ecoinvent
isCopyrightProtected: true
accessRestrictedTo: 1

## General comment
This dataset represents the cultivation of green manure on an area of 1 ha. The dry matter yield is 2300 kg/ha. Green manure is not harvested but incorporated into the soil.
[This dataset was already contained in the ecoinvent database version 2. It was not individually updated during the transfer to ecoinvent version 3. Life Cycle Impact Assessment results may still have changed, as they are affected by changes in the supply chain, i.e. in other datasets. This dataset was generated following the ecoinvent quality guidelines for version 2. It may have been subject to central changes described in the ecoinvent version 3 change report (http://www.ecoinvent.org/database/ecoinvent-version-3/reports-of-changes/), and the results of the central updates were reviewed extensively. The changes added e.g. consistent water flows and other information throughout the database. The documentation of this dataset can be found in the ecoinvent reports of version 2, which are still available via the ecoinvent website. The change report linked above covers all central changes that were made during the conversion process.]

## Included activities start
This activity starts after the harvest of the previous crop. The input of seeds is included.

## Included activities end
The dataset includes all machine operations and corresponding machine infrastructure and sheds. Machine operations are: soil cultivation, sowing and mulching. Further, direct field emissions are included. This activity ends after mulching of the green manure.

## Geography
Refers to an average production in the Swiss lowlands.

## Technology
Organic production

## Time period
The yield data have been collected for the years 1996-2003.

## Reference product
- green manure, organic, until January: 1 ha; By-product classification allocatable product; CPC 34659: Fertilizers n.e.c.
  production volume 3.96633 ha
  properties: carbon allocation 0 kg, carbon content 0, price 26.0287 EUR2005

## Inputs from technosphere
- mulching: 1 ha; lognormal variance with pedigree 0.0026, pedigree (2,1,5,5,1)
- rape seed, organic, for sowing: 10 kg; lognormal variance with pedigree 0.0026, pedigree (2,1,5,5,1)
  properties: carbon content, non-fossil 0.574, dry mass 0.94 kg, water content 0.0638298, wet mass 1 kg
- sowing: 1 ha; lognormal variance with pedigree 0.0026, pedigree (2,1,5,5,1)
- tillage, harrowing, by spring tine harrow: 1 ha; lognormal variance with pedigree 0.0026, pedigree (2,1,5,5,1)

## Inputs from nature
- Occupation, annual crop, non-irrigated, extensive [natural resource, land]: 4611.1 m2*year; lognormal variance with pedigree 0.0026, pedigree (2,1,5,5,1)
- Transformation, from annual crop, non-irrigated, extensive [natural resource, land]: 10000 m2; lognormal variance with pedigree 0.0126, pedigree (2,1,5,5,1)
- Transformation, to annual crop, non-irrigated, extensive [natural resource, land]: 10000 m2; lognormal variance with pedigree 0.0126, pedigree (2,1,5,5,1)

## Emissions to nature
- Dinitrogen monoxide [air, non-urban air or from high stacks]: 1.40733 kg; lognormal variance with pedigree 0.0327, pedigree (2,2,5,5,1)
- Nitrogen oxides [air, non-urban air or from high stacks]: 0.295539 kg; lognormal variance with pedigree 0.0327, pedigree (2,2,5,5,1)
- Cadmium II [water, ground-]: 9.8588e-7 kg; lognormal variance with pedigree 0.0927, pedigree (2,2,5,5,1)
- Chromium III [water, ground-]: 2.5525e-5 kg; lognormal variance with pedigree 0.0927, pedigree (2,2,5,5,1)
- Copper ion [water, ground-]: 4.3039e-5 kg; lognormal variance with pedigree 0.0927, pedigree (2,2,5,5,1)
- Lead II [water, ground-]: 1.4787e-6 kg; lognormal variance with pedigree 0.0927, pedigree (2,2,5,5,1)
- Mercury II [water, ground-]: 1.9544e-7 kg; lognormal variance with pedigree 0.0927, pedigree (2,2,5,5,1)
- Nitrate [water, ground-]: 85.96 kg; lognormal variance with pedigree 0.0427, pedigree (2,2,5,5,1)
- Phosphate [water, ground-]: 0.071505 kg; lognormal variance with pedigree 0.0427, pedigree (2,2,5,5,1)
- Phosphate [water, surface water]: 0.17876 kg; lognormal variance with pedigree 0.0427, pedigree (2,2,5,5,1)
- Phosphorus [water, surface water]: 0.10479 kg; lognormal variance with pedigree 0.0427, pedigree (2,2,5,5,1)
- Zinc II [water, ground-]: 0.00015348 kg; lognormal variance with pedigree 0.0927, pedigree (2,2,5,5,1)

## Sampling procedure
Data were compiled from statistics, pilot network, fertilising recommendations, documents from extension services, information provided by retailers and expert knowledge. The production data were verified and adjusted by a group of experts.

## Extrapolations
This dataset has been copied from an original dataset covering the geography CH. The uncertainty has been adjusted accordingly.

## Review by Hans-Jörg Althaus 2009-01-22
passed
none
