# treatment of waste mineral wool, collection for final disposal

Dataset: EcoSpold 2, unit process
Geography: Europe without Switzerland
Time period: 1994-01-01 to 2022-12-31
Technology level: current
Classification: ISIC rev.4 ecoinvent: 3821:Treatment and disposal of non-hazardous waste
Classification: EcoSpold01Categories: waste management/building demolition
Tags: Treatment
Scenario: Business-as-Usual
System model: Substitution, consequential, long-term
Generated by: [System]
Database: ecoinvent
isCopyrightProtected: true
accessRestrictedTo: 1

## General comment
The waste contains 1kg inert material (GSD=100%) Waste density is 50 kg/m3.

## Included activities end
particulate matter emissions from dismantling and handling, transport to dismantling facilities, final disposal of waste material,

## Technology
Building demolition with skid-steer loaders.

## Reference product
- waste mineral wool: -1 kg; By-product classification Waste; CPC 39990: Other wastes n.e.c.
  production volume 8.325e7 kg
  properties: carbon allocation 0 kg, carbon content 0, carbon content, fossil 0, carbon content, non-fossil 0, dry mass 1 kg, heating value, net 0 MJ, price 0 EUR2005, water content 0, water in wet mass 0 kg, wet mass 1 kg

## Inputs from technosphere
- waste mineral wool, for final disposal: -1 kg; lognormal variance with pedigree 0.002, pedigree (1,1,1,5,1)
  properties: dry mass 1 kg, wet mass 1 kg

## Emissions to nature
- Particulate Matter, < 2.5 um [air, urban air close to ground]: 1.66e-5 kg; lognormal variance with pedigree 0.3252, pedigree (2,3,5,5,1)
- Particulate Matter, > 10 um [air, urban air close to ground]: 8.35e-5 kg; lognormal variance with pedigree 0.0552, pedigree (2,3,5,5,1)
- Particulate Matter, > 2.5 um and < 10um [air, urban air close to ground]: 6.34e-5 kg; lognormal variance with pedigree 0.1452, pedigree (2,3,5,5,1)

## Sampling procedure
waste-specific calculation based on literature data

## Extrapolations
none This dataset has been copied from an original dataset covering the geography CH. The uncertainty has been adjusted accordingly.
