# battery cell production, Li-ion, NMC811

Dataset: EcoSpold 2, unit process
Geography: RoW
Time period: 2017-01-01 to 2022-12-31
Technology level: current
Classification: ISIC rev.4 ecoinvent: 2720:Manufacture of batteries and accumulators
Synonyms: battery cell, nickel-manganese-cobalt 811, Li-ion
Scenario: Business-as-Usual
System model: Substitution, consequential, long-term
Generated by: Eleonora Crenna
Published in: Dai, Q. 2017
Database: ecoinvent
isCopyrightProtected: true
accessRestrictedTo: 1

## General comment
This dataset represents the production of 1 kg of Li-ion battery cell with nickel-manganese-cobalt 811 (NMC811) cathode and silicon coated graphite based anode. The specific energy capacity of a cell is 0.209 kWh/kg cell, calculated based on the information reported in Dai et al. (2017, 2018, 2019). The inventory is modelled according to the publication of Dai et al. (2017) and expert judgement. Infrastructure is included as well. This dataset is a copy of the corresponding regional dataset. Production volume was adjusted.
Reference:
Dai, Q., Dunn, J., Kelly, J. C., & Elgowainy, A. Update of Life Cycle Analysis of Lithium-Ion Batteries in the GREET Model. 2017. Argonne National Laboratory.
Dai, Q., Kelly, J., Dunn, J., & Benavides, P. (2018). Update of bill-of-materials and cathode materials production for lithium-ion batteries in the GREET model. Energy Systems Division, Argonne National Laboratory (ANL), IL, US.
Dai, Q., Kelly, J. C., Gaines, L., & Wang, M. (2019). Life cycle analysis of lithium-ion batteries for automotive applications. Batteries, 5(2), 48.

## Included activities start
The activity starts with the battery cell components and the materials for additional components (esternal case, tabs, etc.) entering the factory gate.

## Included activities end
The activity ends with the production of Li-ion battery cells.

## Geography
This dataset is considered representative of the global situation. It is based on data from the geography China, which is the leader country of Li-ion battery production.

## Technology
This dataset includes a method of producing Li-ion cell. Lithium ions move from the cathode (NMC811) into the electrolyte through the micropores of the separator into the silicon coated graphite anode during the charging phase. During the discharge of the battery, the Li+-ions move back into the cathode.

## Time period
The time period is from 2017 (year of the collection of data) and 2020 (year of the dataset)

## Reference product
- battery cell, Li-ion, NMC811: 1 kg; By-product classification allocatable product; CPC 46410: Primary cells and primary batteries
  production volume 3.99868e7 kg
  properties: carbon allocation 0.266233 kg, carbon content 0.266233, carbon content, fossil 0.26431, carbon content, non-fossil 0.00192286, copper content 0.032901, dry mass 1 kg, price 14.69 EUR2005, water content 0, water in wet mass 0 kg, wet mass 1 kg

## Inputs from technosphere
- aluminium collector foil, for Li-ion battery: 0.0284 kg; lognormal variance with pedigree 0.0066, pedigree (3,4,2,5,1)
  properties: aluminium content 1, dry mass 1 kg, wet mass 1 kg
- aluminium, wrought alloy: 0.0284 kg; lognormal variance with pedigree 0.0066, pedigree (3,4,2,5,1)
  properties: dry mass 1 kg, wet mass 1 kg
- anode, silicon coated graphite, for Li-ion battery: 0.2181 kg; lognormal variance with pedigree 0.0052, pedigree (2,4,2,5,1)
  properties: carbon content, fossil 0.948898, carbon content, non-fossil 0.0088164, dry mass 1 kg, wet mass 1 kg
- battery separator: 0.0182 kg; lognormal variance with pedigree 0.0052, pedigree (2,4,2,5,1)
  properties: carbon content, fossil 0.603377, dry mass 1 kg, wet mass 1 kg
- cathode, NMC811, for Li-ion battery: 0.3773 kg; lognormal variance with pedigree 0.0066, pedigree (3,4,2,5,1)
  properties: carbon content, fossil 0.02125, dry mass 1 kg, wet mass 1 kg
- chemical factory, organics: 4e-10 unit; lognormal variance with pedigree 0.478, pedigree (4,5,5,5,5)
- copper collector foil, for Li-ion battery: 0.1243 kg; lognormal variance with pedigree 0.0052, pedigree (2,4,2,5,1)
  properties: copper content 1, dry mass 1 kg, wet mass 1 kg
- copper, anode: 0.033 kg; lognormal variance with pedigree 0.0066, pedigree (3,4,2,5,1)
  properties: copper content 0.997, dry mass 1 kg, wet mass 1 kg
- electricity, medium voltage: 0.0205226, 0.0389994, 0.0233052, 0.000469292, 0.00223665, 0.00262627, 0.000681312, 0.157815, 0.00528069, 0.260211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 kWh (46 suppliers, which the file names only by identifier); sum of these 1.2616 kWh; lognormal variance with pedigree 0.0052, pedigree (2,4,2,5,1)
- electrolyte, for Li-ion battery: 0.1683 kg; lognormal variance with pedigree 0.0052, pedigree (2,4,2,5,1)
  properties: carbon content, fossil 0.183946, dry mass 1 kg, wet mass 1 kg
- extrusion, plastic film: 0.004 kg; lognormal variance with pedigree 0.0066, pedigree (3,4,2,5,1)
- heat, district or industrial, natural gas: 13.291 MJ; lognormal variance with pedigree 0.0052, pedigree (2,4,2,5,1)
  properties: heating value, net 1 MJ
- polyethylene terephthalate, granulate, amorphous: 0.0028 kg; lognormal variance with pedigree 0.0066, pedigree (3,4,2,5,1)
  properties: carbon content, fossil 0.625, dry mass 1 kg, heating value, net 22.95 MJ, wet mass 1 kg
- polypropylene, granulate: 0.0012 kg; lognormal variance with pedigree 0.0066, pedigree (3,4,2,5,1)
  properties: carbon content, fossil 0.857143, dry mass 1 kg, heating value, net 32.78 MJ, wet mass 1 kg
- sheet rolling, aluminium: 0.0284 kg; lognormal variance with pedigree 0.0066, pedigree (3,4,2,5,1)
- sheet rolling, copper: 0.033 kg; lognormal variance with pedigree 0.0066, pedigree (3,4,2,5,1)

## Sampling procedure
From Literature and expert judgement

## Extrapolations
The dataset is extrapolated from CN data; the uncertainty has been adjusted accordingly.
