# ventilation of dwellings, decentralized, 6 x 120 m3/h, polyethylene ducts

Dataset: EcoSpold 2, unit process
Geography: RoW
Time period: 2003-01-01 to 2022-12-31
Technology level: current
Classification: ISIC rev.4 ecoinvent: 4322:Plumbing, heat and air-conditioning installation
Classification: EcoSpold01Categories: ventilation/ventilation systems
Tags: ConvertedDataset
Scenario: Business-as-Usual
System model: Substitution, consequential, long-term
Generated by: Alex Primas
Published in: Hässig, W. 2007
Database: ecoinvent
isCopyrightProtected: true
accessRestrictedTo: 1

## General comment
Life time of system and ducts 50 years. Life time of ventilation unit 20 years. Life time of filters 1 year. Ventilation system for a multi family house. The house considered in the investigation includes 6 flats with 130 m2 floor area each and a ventilation rate of 120 m3/h. The influence of a smaller concrete demand due to embedment of ventilation tubes in the concrete of the floor (-4.86 kg concrete per m2 floor area) is not included.
[This dataset was already contained in the ecoinvent database version 2. It was not individually updated during the transfer to ecoinvent version 3. Life Cycle Impact Assessment results may still have changed, as they are affected by changes in the supply chain, i.e. in other datasets. This dataset was generated following the ecoinvent quality guidelines for version 2. It may have been subject to central changes described in the ecoinvent version 3 change report (http://www.ecoinvent.org/database/ecoinvent-version-3/reports-of-changes/), and the results of the central updates were reviewed extensively. The changes added e.g. consistent water flows and other information throughout the database. The documentation of this dataset can be found in the ecoinvent reports of version 2, which are still available via the ecoinvent website. The change report linked above covers all central changes that were made during the conversion process.]

## Included activities end
Materials used for the construction and renewal of the ventilation system. Electricity for the operation of the system on 12 month per year included. Transport of the components to the construction site. Disposal of the components included. Influence of ventilation ducts on building construction not included.

## Geography
Data representative for a building in Zurich, Switzerland

## Technology
Electricity demand of ventilator (0.4 Wh/m3) representative for DC- or EC-motors and a system design with low pressure drops. Electricity demand of control unit 10 W. Additional 0.3 kWh/(m2 a) electricity demand for defrosting of heat exchanger. Decentral ventilation system without ground heat exchanger. Air intake on the facade and direct to the 6 decentral ventilation units with a short galvanised steel tube (125 mm diameter). Distribution of fresh- and exhaust-air within the flat with polyethylene tubes (75 mm diameter). Exhaust air from the 6 decentral ventilation units with a short galvanised steel tube (400 mm diameter) direct to the exhaust on the facade.

## Time period
Amount of material investigated in 2003

## Reference product
- ventilation of dwellings, decentralized, 6 x 120 m3/h: 1 m2*year; By-product classification allocatable product; CPC 44815: Fans and ventilating or recycling hoods of the domestic type
  production volume 3.96633 m2*year
  properties: carbon allocation 0 kg, carbon content 0, price 0.653551 EUR2005

## Inputs from technosphere
- air filter, decentralized unit, 180-250 m3/h: 0.0151 unit; lognormal variance with pedigree 0.006, pedigree (3,4,5,5,1)
  properties: carbon content, fossil 0.367027, carbon content, non-fossil 0.154835, dry mass 0.22 kg, wet mass 0.22 kg
- air filter, in exhaust air valve: 0.0226 unit; lognormal variance with pedigree 0.006, pedigree (3,4,5,5,1)
  properties: carbon content, fossil 0.65625, dry mass 0.04 kg, wet mass 0.04 kg
- blower and heat exchange unit, decentralized, 180-250 m3/h: 0.000308 unit; lognormal variance with pedigree 0.006, pedigree (3,4,5,5,1)
  properties: carbon content, fossil 0.225044, carbon content, non-fossil 6.48865e-7, dry mass 43.1 kg, wet mass 43.1 kg
- electricity, low voltage: 0.139722, 0.0507929, 0.0103883, 0.0413251, 0.297933, 0.277372, 2.48708, 0.345389 kWh (8 suppliers, which the file names only by identifier); sum of these 3.65 kWh; lognormal variance with pedigree 0.0032, pedigree (2,3,5,5,1)
- flexible duct, aluminium/PET, DN of 125: 0.000513 m; lognormal variance with pedigree 0.006, pedigree (3,4,5,5,1)
  properties: carbon content, fossil 0.436512, dry mass 0.205 kg, wet mass 0.205 kg
- silencer, steel, DN 125: 0.00123 unit; lognormal variance with pedigree 0.006, pedigree (3,4,5,5,1)
  properties: carbon content, fossil 0.00483456, dry mass 8.3 kg, wet mass 8.3 kg
- used air filter decentralized unit, 180-250 m3/h: -0.0151 unit; lognormal variance with pedigree 0.006, pedigree (3,4,1,5,1)
  properties: carbon content, fossil 0.367027, carbon content, non-fossil 0.154835, dry mass 0.22 kg, wet mass 0.22 kg
- used air filter in exhaust air valve: -0.0226 unit; lognormal variance with pedigree 0.006, pedigree (3,4,1,5,1)
  properties: carbon content, fossil 0.65625, dry mass 0.04 kg, wet mass 0.04 kg
- used blower and heat exchange unit decentralized, 180-250 m3/h: -0.000308 unit; lognormal variance with pedigree 0.006, pedigree (3,4,1,5,1)
  properties: carbon content, fossil 0.225044, carbon content, non-fossil 6.48865e-7, dry mass 43.1 kg, wet mass 43.1 kg
- used flexible duct aluminium/PET, DN of 125: -0.000513 m; lognormal variance with pedigree 0.006, pedigree (3,4,1,5,1)
  properties: carbon content, fossil 0.436512, dry mass 0.205 kg, wet mass 0.205 kg
- used silencer steel, DN 125: -0.00123 unit; lognormal variance with pedigree 0.006, pedigree (3,4,1,5,1)
  properties: carbon content, fossil 0.00483456, dry mass 8.3 kg, wet mass 8.3 kg
- used ventilation control and wiring decentralized unit: -0.000308 unit; lognormal variance with pedigree 0.006, pedigree (3,4,1,5,1)
  properties: carbon content, fossil 0.275687, carbon content, non-fossil 3.69963e-5, dry mass 2.18 kg, wet mass 2.18 kg
- ventilation control and wiring, decentralized unit: 0.000308 unit; lognormal variance with pedigree 0.006, pedigree (3,4,5,5,1)
  properties: carbon content, fossil 0.275687, carbon content, non-fossil 3.69963e-5, dry mass 2.18 kg, wet mass 2.18 kg
- ventilation system, decentralized, 6 x 120 m3/h, polyethylene ducts: 2.56e-5 unit; lognormal variance with pedigree 0.006, pedigree (3,4,5,5,1)

## Sampling procedure
Questionnaire, technical information and assumptions. Data valid for example building used.

## Extrapolations
none This dataset has been copied from an original dataset covering the geography CH. The uncertainty has been adjusted accordingly.

## Review by Rolf Frischknecht 2007-08-16
passed
none
