# transport, passenger car, EURO 3

Dataset: EcoSpold 2, unit process
Geography: RoW
Time period: 2012-01-01 to 2022-12-31
Technology level: current
Classification: ISIC rev.4 ecoinvent: 4922:Other passenger land transport
Tags: internal combustion engine
Scenario: Business-as-Usual
System model: Substitution, consequential, long-term
Generated by: Sofia Parada Tur
Database: ecoinvent
isCopyrightProtected: true
accessRestrictedTo: 1

## General comment
This activity provides an average transport in a passenger car of the class EURO 3 with internal combustion engine. The inventory is a linking activity, that links the more specific products in the category EURO 3 to an average product.

## Included activities end
This activity provides an average transport, passenger car in the categpry EURO 3.

## Technology
Average transport in a passenger car of the category EURO 3 with internal combustion engine. The average takes into account different car sizes (small, medium and large) and fuel types (petrol, diesel and natural gas)

## Parameters
- production volumes sum: 5.23417e12 km; name PV_sum; = 3.03E11+ 5.05E11 + 1.92E8 + 1.20E12 + 1.86E12 + 1.02E09 + 1.34E12+ 2.10E10 + 3.96E9; lognormal variance with pedigree 0.0026, pedigree (3,1,1,1,1)
  sum of the production volumes of the input exchanges in the present inventory. Values obtained from the ecoinvent datasets that produce these inputs as reference products.

## Reference product
- transport, passenger car, EURO 3: 1 km; By-product classification allocatable product; CPC 64119: Other land transportation services of passengers, n.e.c.
  production volume 4.29837e12 km
  properties: carbon allocation 0 kg, carbon content 0, price 0.162494 EUR2005

## Inputs from technosphere
All rows: lognormal variance with pedigree 0.0026, pedigree (3,1,4,1,1)
- transport, passenger car, large size, diesel, EURO 3: 0.0964814 km
- transport, passenger car, large size, natural gas, EURO 3: 3.6682e-5 km
- transport, passenger car, large size, petrol, EURO 3: 0.0578888 km
- transport, passenger car, medium size, diesel, EURO 3: 0.355357 km
- transport, passenger car, medium size, natural gas, EURO 3: 0.000194873 km
- transport, passenger car, medium size, petrol, EURO 3: 0.229263 km
- transport, passenger car, small size, diesel, EURO 3: 0.0229263 km
- transport, passenger car, small size, natural gas, EURO 3: 0.000756567 km
- transport, passenger car, small size, petrol, EURO 3: 0.25601 km
