# exhaust air outlet production, steel/aluminium, 85x365 mm

Dataset: EcoSpold 2, unit process
Geography: RoW
Time period: 2003-01-01 to 2022-12-31
Technology level: current
Classification: ISIC rev.4 ecoinvent: 2819:Manufacture of other general-purpose machinery
Classification: EcoSpold01Categories: ventilation/production of components
Tags: ConvertedDataset
Scenario: Business-as-Usual
System model: Substitution, consequential, long-term
Generated by: Alex Primas
Published in: Hässig, W. 2007
Database: ecoinvent
isCopyrightProtected: true
accessRestrictedTo: 1

## General comment
Production of a typical component used for a ventilation system in a multi family house. The house considered in the investigation includes 6 flats with 130 m2 floor area each and a ventilation rate of 120 m3/h.
[This dataset was already contained in the ecoinvent database version 2. It was not individually updated during the transfer to ecoinvent version 3. Life Cycle Impact Assessment results may still have changed, as they are affected by changes in the supply chain, i.e. in other datasets. This dataset was generated following the ecoinvent quality guidelines for version 2. It may have been subject to central changes described in the ecoinvent version 3 change report (http://www.ecoinvent.org/database/ecoinvent-version-3/reports-of-changes/), and the results of the central updates were reviewed extensively. The changes added e.g. consistent water flows and other information throughout the database. The documentation of this dataset can be found in the ecoinvent reports of version 2, which are still available via the ecoinvent website. The change report linked above covers all central changes that were made during the conversion process.]

## Included activities end
Materials used for the production. Estimation of electricity use for the different production steps. Energy use for heating of the production building. Transport of raw materials to the plant. Estimation for the Infrastructure of the Production site included.

## Geography
Data for production in Switzerland used.

## Technology
Facade mounted exhaust air outlet made of zinc coated steel and aluminium. Compatible with spiral seam duct of 125 mm diameter. Weight per element 2.5 kg

## Time period
Materials investigated in 2003

## Reference product
- exhaust air outlet, steel/aluminium, 85x365 mm: 1 unit; By-product classification allocatable product; CPC 43941: Parts of producer gas or water gas generators; parts of acetylene gas generators and similar water process gas[…]
  production volume 3.96633 unit
  properties: carbon allocation 0.007925 kg, carbon content 0.00317, carbon content, fossil 0.00317, carbon content, non-fossil 0, dry mass 2.5 kg, price 3.08608 EUR2005, water content 0, water in wet mass 0 kg, wet mass 2.5 kg

## Inputs from technosphere
- aluminium, wrought alloy: 0.44 kg; lognormal variance with pedigree 0.0146, pedigree (2,4,5,5,1)
  properties: dry mass 1 kg, wet mass 1 kg
- electricity, medium voltage: 0.117246, 0.0217113, 0.00438678, 0.0557355, 0.117983, 0.967357, 0.0812267, 0.0043537 kWh (8 suppliers, which the file names only by identifier); sum of these 1.37 kWh; lognormal variance with pedigree 0.11, pedigree (3,5,5,5,3)
- heat, district or industrial, natural gas: 0.478737, 1.35372, 3.15504 MJ (3 suppliers, which the file names only by identifier); sum of these 4.9875 MJ; lognormal variance with pedigree 0.038, pedigree (4,5,5,5,1)
  properties: heating value, net 1 MJ
- heat, district or industrial, other than natural gas: 0.00721837, 0.846474, 4.13381 MJ (3 suppliers, which the file names only by identifier); sum of these 4.9875 MJ; lognormal variance with pedigree 0.032, pedigree (1,1,5,5,1)
  properties: heating value, net 1 MJ
- sheet rolling, aluminium: 0.44 kg; lognormal variance with pedigree 0.016, pedigree (3,4,5,5,1)
- sheet rolling, steel: 2.31 kg; lognormal variance with pedigree 0.016, pedigree (3,4,5,5,1)
- steel, low-alloyed: 0.855 kg; lognormal variance with pedigree 0.0146, pedigree (2,4,5,5,1)
  properties: carbon content, fossil 0.005, dry mass 1 kg, wet mass 1 kg
- steel, unalloyed: 1.46 kg; lognormal variance with pedigree 0.0146, pedigree (2,4,5,5,1)
  properties: carbon content, fossil 0.0025, dry mass 1 kg, wet mass 1 kg
- ventilation components factory: 1e-8 unit; lognormal variance with pedigree 0.356, pedigree (4,5,5,5,3)
- zinc coat, coils: 0.53 m2; lognormal variance with pedigree 0.016, pedigree (3,4,5,5,1)

## Sampling procedure
Questionnaire and technical information of producer. Data of one common product used.

## Extrapolations
none This dataset has been copied from an original dataset covering the geography CH. The uncertainty has been adjusted accordingly.

## Review by Rolf Frischknecht 2007-08-16
passed
none
