# tap water production, underground water with disinfection

Dataset: EcoSpold 2, unit process
Geography: BR
Time period: 2015-01-01 to 2022-12-31
Technology level: current
Classification: ISIC rev.4 ecoinvent: 3600:Water collection, treatment and supply
Classification: EcoSpold01Categories: water supply/production
Synonyms: potable water
Scenario: Business-as-Usual
System model: Substitution, consequential, long-term
Generated by: Laura Rubio
Published in: Gmünder S. 2017
Database: ecoinvent
isCopyrightProtected: true
accessRestrictedTo: 1

## General comment
This dataset is created as a child of the global dataset with edited production volume for this geography.
This dataset represents production of 1 kg of tap water under pressure at facility gate, ready for distribution in network. This dataset is approximating the inventory for underground water pumping and disinfection using chlorine using data from two facilities of different technology in Quebec. Chlorine consumption is estimated using data from the artificial recharged wells dataset and energy inputs are estimated using data from underground water without treatment dataset.
[This dataset is meant to replace the following datasets:
- tap water production and supply, GLO, 2000 - 2000]

## Included activities start
From the intake pumping of raw surface water into the water treatment plant.

## Included activities end
This dataset ends with the production of tap water, at facility gate, under pressure. It includes energy for intake pumping, lighting and heating of the building as well as the energy of the pump pressurizing water to the beginning of the network. Infrastructure for the facility is estimated. It excludes energy for pumping stations and water losses within the network which is included in the tap water market. Emissions to the environment occurring during the treatment and during the distribution were not considered as they are assumed negligible. Main substance in water that would be released in the environment are assumed to be considered in wastewater processes.

## Geography
Extrapolated from data from two plants in Quebec (Canada).The uncertainty was adjusted accordingly.

## Time period
The time period is set from 2015 to the year 2017 as it is a considering period in which conventional treatment plants have not passed through drastic technological changes.

## Reference product
- tap water: 1 kg; By-product classification allocatable product; CPC 18000: Natural water
  production volume 1.10783e11 kg
  properties: carbon allocation 6.08566e-7 kg, carbon content 0.0017899, carbon content, fossil 0.0017899, carbon content, non-fossil 0, dry mass 0.00034 kg, price 0.000397 EUR2005, water content 2940.18, water in wet mass 0.99966 kg, wet mass 1 kg

## Inputs from technosphere
- chlorine, liquid: 1.40443e-6 kg; lognormal variance with pedigree 0.013, pedigree (4,4,3,5,1)
  properties: dry mass 1 kg, wet mass 1 kg
- electricity, medium voltage: 0.000399 kWh; lognormal variance with pedigree 0.013, pedigree (4,4,3,5,1)
- pump station: 2.0568e-11 unit; lognormal variance with pedigree 0.045, pedigree (5,4,3,5,1)
- water pump operation, diesel: 1.49144e-5 MJ; lognormal variance with pedigree 0, pedigree (1,1,3,1,1)
  properties: density 0.84 kg/l, fuel input in physical units, L 4.11e-7 l, heating value, net 43.2 MJ, price 0.07 EUR2005

## Inputs from nature
- Water, well, in ground [natural resource, in water]: 0.001 m3; lognormal variance with pedigree 0.2106, pedigree (5,5,5,5,5)

## Sampling procedure
Based on data collected from two treatment plants using underground water and with disinfection, located in Quebec (Canada). See corresponding Quebec dataset for more information.

## Extrapolations
From two underground water with disinfection tap water production facilities in Quebec (Canada) to Brazilian average of same technology. Brazilian production volumen data was used for regionalizing the dataset, the remaining exchanges were copied from the global dataset.Underground water with desinfection accounts for 0.2% of the total produced tap water in Brazil. The uncertainty has been changed accordingly.

## Review by Philippe Loubet 2017-11-23
The overall quality of this dataset is acceptable.
In the future it would be desirable to implement specific data from Brazil.
