# methyl tert-butyl ether production

Dataset: EcoSpold 2, unit process
Geography: RoW
Time period: 1991-01-01 to 2022-12-31
Technology level: current
Classification: ISIC rev.4 ecoinvent: 2011:Manufacture of basic chemicals
Classification: EcoSpold01Categories: chemicals/organics
Synonyms: MTBE
Tags: ConvertedDataset
Scenario: Business-as-Usual
System model: Substitution, consequential, long-term
Generated by: Niels Jungbluth
Published in: Jungbluth, N. 2007
Database: ecoinvent
isCopyrightProtected: true
accessRestrictedTo: 1

## General comment
Rough estimation for this product
[This dataset was already contained in the ecoinvent database version 2. It was not individually updated during the transfer to ecoinvent version 3. Life Cycle Impact Assessment results may still have changed, as they are affected by changes in the supply chain, i.e. in other datasets. This dataset was generated following the ecoinvent quality guidelines for version 2. It may have been subject to central changes described in the ecoinvent version 3 change report (http://www.ecoinvent.org/database/ecoinvent-version-3/reports-of-changes/), and the results of the central updates were reviewed extensively. The changes added e.g. consistent water flows and other information throughout the database. The documentation of this dataset can be found in the ecoinvent reports of version 2, which are still available via the ecoinvent website. The change report linked above covers all central changes that were made during the conversion process.]

## Included activities end
Infrastructure, use of raw materials for production of MTBE. No data for emissions and catalysts.

## Geography
Publication in the US.

## Technology
Reaction of isobutene with methanol. Reaction temperature 100°C. Catalysts are used.

## Time period
Time of publication.

## Reference product
- methyl tert-butyl ether: 1 kg; By-product classification allocatable product; CPC 34170: Ethers, alcohol peroxides, ether peroxides, epoxides, acetals and hemiacetals, and their halogenated, sulphona[…]
  production volume 2.67763 kg
  properties: carbon allocation 0.681818 kg, carbon content 0.681818, carbon content, fossil 0.681818, carbon content, non-fossil 0, dry mass 1 kg, heating value, net 37.14 MJ, price 1.14152 EUR2005, water content 0, water in wet mass 0 kg, wet mass 1 kg

## Inputs from technosphere
- butadiene: 0.653 kg; lognormal variance with pedigree 0.042, pedigree (4,4,5,5,3)
  properties: carbon content, fossil 0.857143, dry mass 1 kg, heating value, net 40.35 MJ, wet mass 1 kg
- chemical factory, organics: 4e-10 unit; lognormal variance with pedigree 0.324, pedigree (4,4,5,5,1)
- methanol: 0.37 kg; lognormal variance with pedigree 0.024, pedigree (4,4,5,5,1)
  properties: carbon content, fossil 0.375, dry mass 1 kg, heating value, net 20 MJ, wet mass 1 kg

## Sampling procedure
Literature.

## Extrapolations
From single data to global situation. Use of isobuten approximated with butadiene. This dataset has been copied from an original dataset covering the geography RER. The uncertainty has been adjusted accordingly.

## Review by Michael Spielmann (obsolete) 2003-07-16
Passed.
