# packaging film production, low density polyethylene

Dataset: EcoSpold 2, unit process
Geography: RoW
Time period: 1993-01-01 to 2022-12-31
Technology level: current
Classification: ISIC rev.4 ecoinvent: 2220:Manufacture of plastics products
Classification: EcoSpold01Categories: plastics/processing
Tags: ConvertedDataset
Scenario: Business-as-Usual
System model: Substitution, consequential, long-term
Generated by: Roland Hischier
Published in: Hischier R. 2007
Database: ecoinvent
isCopyrightProtected: true
accessRestrictedTo: 1

## General comment
Example process for the utilization of the different converting modules in the database.
[This dataset was already contained in the ecoinvent database version 2. It was not individually updated during the transfer to ecoinvent version 3. Life Cycle Impact Assessment results may still have changed, as they are affected by changes in the supply chain, i.e. in other datasets. This dataset was generated following the ecoinvent quality guidelines for version 2. It may have been subject to central changes described in the ecoinvent version 3 change report (http://www.ecoinvent.org/database/ecoinvent-version-3/reports-of-changes/), and the results of the central updates were reviewed extensively. The changes added e.g. consistent water flows and other information throughout the database. The documentation of this dataset can be found in the ecoinvent reports of version 2, which are still available via the ecoinvent website. The change report linked above covers all central changes that were made during the conversion process.]

## Included activities end
This process contains the plastic amount and the transport of the plastic from the production site to the converting site as well as the dataset "extrusion, plastic film"

## Geography
based on average European extrusion process

## Technology
present technologies

## Time period
time to which data refer

## Reference product
- packaging film, low density polyethylene: 1 kg; By-product classification allocatable product; CPC 36330: Plates, sheets, film, foil and strip, of plastics, not self-adhesive, non-cellular and not reinforced, laminat[…]
  production volume 2.67763 kg
  properties: carbon allocation 0.857143 kg, carbon content 0.857143, carbon content, fossil 0.857143, carbon content, non-fossil 0, dry mass 1 kg, heating value, net 42.47 MJ, price 2.97 EUR2005, water content 0, water in wet mass 0 kg, wet mass 1 kg

## Inputs from technosphere
- extrusion, plastic film: 1.02 kg; lognormal variance with pedigree 0.0214, pedigree (2,3,5,5,3)
- polyethylene, low density, granulate: 1.02 kg; lognormal variance with pedigree 0.0214, pedigree (2,3,5,5,3)
  properties: carbon content, fossil 0.857143, dry mass 1 kg, heating value, net 42.47 MJ, wet mass 1 kg

## Sampling procedure
company data

## Extrapolations
no extrapolation This dataset has been copied from an original dataset covering the geography RER. The uncertainty has been adjusted accordingly.

## Review by Mischa Classen 2003-06-10
Eintrag "none" bei uncertainty adjustment fehlt -> korrigiert.
