# heat and power co-generation unit construction, organic Rankine cycle, 1400kW thermal, components for electricity only

Dataset: EcoSpold 2, unit process
Geography: RoW
Time period: 2000-01-01 to 2022-12-31
Technology level: current
Classification: EcoSpold01Categories: wood energy/cogeneration
Classification: ISIC rev.4 ecoinvent: 4220:Construction of utility projects
Tags: ConvertedDataset
Scenario: Business-as-Usual
System model: Substitution, consequential, long-term
Generated by: Christian Bauer
Published in: Bauer, C. 2007
Database: ecoinvent
isCopyrightProtected: true
accessRestrictedTo: 1

## General comment
Assumed lifetime: 20 years. Operation time for heat production 6250 h/a, for electricity production 1110 h/a, calculated from reported annual production.
[This dataset was already contained in the ecoinvent database version 2. It was not individually updated during the transfer to ecoinvent version 3. Life Cycle Impact Assessment results may still have changed, as they are affected by changes in the supply chain, i.e. in other datasets. This dataset was generated following the ecoinvent quality guidelines for version 2. It may have been subject to central changes described in the ecoinvent version 3 change report (http://www.ecoinvent.org/database/ecoinvent-version-3/reports-of-changes/), and the results of the central updates were reviewed extensively. The changes added e.g. consistent water flows and other information throughout the database. The documentation of this dataset can be found in the ecoinvent reports of version 2, which are still available via the ecoinvent website. The change report linked above covers all central changes that were made during the conversion process.]

## Included activities end
Infrastructure includes the generator and a control cabinet.

## Geography
Could be used for central European conditions.

## Technology
Specific cogeneration unit installed in Switzerland.

## Reference product
- heat and power co-generation unit, organic Rankine cycle, 1400kW thermal, components for electricity only: 1 unit; By-product classification allocatable product; CPC 461: Electric motors, generators and transformers, and parts thereof
  production volume 3.96633 unit
  properties: carbon allocation 0 kg, carbon content 0, price 34703.6 EUR2005

## Inputs from technosphere
- control cabinet, heat and power co-generation unit, 160kW electrical: 3 unit; lognormal variance with pedigree 0.15, pedigree (4,5,5,5,1)
- generator, 200kW electrical: 1 unit; lognormal variance with pedigree 0.15, pedigree (4,5,5,5,1)

## Sampling procedure
literature

## Extrapolations
none This dataset has been copied from an original dataset covering the geography CH. The uncertainty has been adjusted accordingly.

## Review by Christian Bauer 2003-08-19
passed
