# natural stone plate production, cut

Dataset: EcoSpold 2, unit process
Geography: RoW
Time period: 2000-01-01 to 2022-12-31
Technology level: current
Classification: EcoSpold01Categories: construction materials/others
Classification: ISIC rev.4 ecoinvent: 2396:Cutting, shaping and finishing of stone
Tags: ConvertedDataset
Scenario: Business-as-Usual
System model: Substitution, consequential, long-term
Generated by: Daniel Kellenberger (obsolete)
Published in: Kellenberger D. 2007
Database: ecoinvent
isCopyrightProtected: true
accessRestrictedTo: 1

## General comment
The drilling for the mining process is assumed to be done with compressed air, which is produced with electricity. The sawing is assumed to be accomplished with diamond wires. The diamond losses are not taken into account even though they might be significant as no data on diamond production is available. The dust emissions are estimated based on the losses (volume of granite with a density of 2?750 kg/m3) by cutting a plate with the geometry 0.5 * 0.5 * 0.03 m and a weight of 20 kg. It is assumed that 95% of the dust is bound in the cooling water.
[This dataset was already contained in the ecoinvent database version 2. It was not individually updated during the transfer to ecoinvent version 3. Life Cycle Impact Assessment results may still have changed, as they are affected by changes in the supply chain, i.e. in other datasets. This dataset was generated following the ecoinvent quality guidelines for version 2. It may have been subject to central changes described in the ecoinvent version 3 change report (http://www.ecoinvent.org/database/ecoinvent-version-3/reports-of-changes/), and the results of the central updates were reviewed extensively. The changes added e.g. consistent water flows and other information throughout the database. The documentation of this dataset can be found in the ecoinvent reports of version 2, which are still available via the ecoinvent website. The change report linked above covers all central changes that were made during the conversion process.]

## Included activities end
Includes the raw material granite, the mining, sawing and cooling, the transports within the mine and to the regional storage in Switzerland and the infrastructure (machines). No administration, wastewater, wear and spare parts are included. Dust is accounted for.

## Geography
For some exchanges RER- and GLO-modules are used as proxy

## Technology
Typical technology for average Swiss production. Mining of boulders by direct separation from rock, whole to whole drilling, kerving wire saw, oxygen lance and water jet. Cutting by wire saw.

## Parameters
- density: 2750 kg/m3; name density_naturalstoneplate
  Literature value. Density of the natural stone.
- fraction, process water, to air: 0.15 dimensionless; name fraction_PW_to_air; lognormal variance with pedigree 0.092025, pedigree (4,4,3,2,4)
  Literature value. In case when no industry/process specific data are available, default evaporation fraction value is used. This value is 15% and is based on literature (Statistics Canada, 2007 & Shaffer, K.H., 2008, Consumptive water use in the Great Lakes Basin, USGS & Shiklomanov, 2003, World Water Resources at the Beginning of the 21st Century) and has been approved by an expert.
- surface: 0.56 m2; name surface_naturalstoneplate; = (0.5*0.5*2)+(0.5*0.03*4)
  Calculated value. Surface of the natural stone plate. The dimensions of natural stone plate are 0.5m*0.5m*0.03m.
- volume: 0.0075 m3; name volume_naturalstoneplate; = 0.5*0.5*0.03
  Calculated value. Volume of the natural stone plate. The dimensions of natural stone plate are 0.5m*0.5m*0.03m.
- weight: 20.625 kg; = volume_naturalstoneplate* density_naturalstoneplate
  Calculated value. Weight of the natural stone plate.

## Reference product
- natural stone plate, cut: 1 kg; By-product classification allocatable product; CPC 37690: Other worked monumental or building stone and articles thereof; other artificially coloured granules, chipping[…]
  production volume 3.96633 kg
  properties: carbon allocation 0 kg, carbon content 0, carbon content, fossil 0, carbon content, non-fossil 0, dry mass 1 kg, price 0.148 EUR2005, water content 0, water in wet mass 0 kg, wet mass 1 kg

## Inputs from technosphere
- diesel, burned in building machine: 1.071 MJ; lognormal variance with pedigree 0.04, pedigree (3,5,5,5,3)
  properties: heating value, net 1 MJ
- electricity, medium voltage: 0.0479254, 0.00887467, 0.00179313, 0.0227824, 0.0482265, 0.395416, 0.0332022, 0.00177961 kWh (8 suppliers, which the file names only by identifier); sum of these 0.56 kWh; lognormal variance with pedigree 0.032, pedigree (1,1,5,5,1)
- limestone quarry infrastructure: 2e-10 unit; lognormal variance with pedigree 0.34, pedigree (3,5,5,5,3)

## Inputs from nature
- Granite [natural resource, in ground]: 1.38 kg; lognormal variance with pedigree 0.108, pedigree (5,5,5,5,3)
- Water, river [natural resource, in water]: 0.00373 m3; lognormal variance with pedigree 0.0386, pedigree (2,5,5,5,3)

## Emissions to nature
- Particulate Matter, < 2.5 um [air, unspecified]: 0.0056 kg; lognormal variance with pedigree 0.5426, pedigree (2,5,5,5,5)
- Particulate Matter, > 10 um [air, unspecified]: 0.0028 kg; lognormal variance with pedigree 0.2826, pedigree (2,5,5,5,5)
- Particulate Matter, > 2.5 um and < 10um [air, unspecified]: 0.0102667 kg; lognormal variance with pedigree 0.3626, pedigree (2,5,5,5,5)
- Water [air, unspecified]: 0.0005595 m3; lognormal variance with pedigree 0.0427, pedigree (2,2,5,5,1)
- Water [water, unspecified]: 0.0031705 m3; lognormal variance with pedigree 0.0427, pedigree (2,2,5,5,1)

## Sampling procedure
Literature

## Extrapolations
See geography This dataset has been copied from an original dataset covering the geography CH. The uncertainty has been adjusted accordingly.

## Review by Rolf Frischknecht 2010-02-07
passed

## Review by Emilia Moreno Ruiz 2013-09-18
PM emissions corrected
