# electricity production, lignite

Dataset: EcoSpold 2, unit process
Geography: CA-SK
Time period: 1980-01-01 to 2022-12-31
Technology level: modern
Classification: ISIC rev.4 ecoinvent: 3510:Electric power generation, transmission and distribution
Classification: EcoSpold01Categories: lignite/power plants
Synonyms: brown coal; sub-bituminous coal
Tags: lignite power; Canada; coal power; fossil fuels
Scenario: Business-as-Usual
System model: Substitution, consequential, long-term
Generated by: Karin Treyer
Published in: Röder, A. 2007
Database: ecoinvent
isCopyrightProtected: true
accessRestrictedTo: 1

## General comment
This dataset represents the production of high voltage electricity in an average lignite power plant in Canada - Saskatchewan in 2013. "Lignite" is used as representant for "brown coal", which includes sub-bituminous coal and lignite according to the definition of the IEA electricity information 2014. (IEA. 2014. Electricity Information 2014. ISBN 978-92-64-21692-1. International Energy Agency (IEA), Paris Cedex (FR).)
All exchanges in this dataset except for emissions of SO2, NOx and particles are production-weighted averages of the figures in the datasets in ecoinvent version two, which are valid for the following 10 countries: AT, BA, CZ, DE, ES, FR, HU, PL, SI, SK. The exception values are production-weighted averages of version 2 countries and the new countries in version 3 (AU, CA, CL, ID, IN, KR, MX, MY, PE, RU, TH, TR, TW, TZ, UA, ZA)All exchanges in this dataset except for emissions of SO2, NOx and particles have been overtaken from the global dataset, which in their turn are production-weighted averages of the figures in the datasets in ecoinvent version two, which are valid for the following 10 countries: AT, BA, CZ, DE, ES, FR, HU, PL, SI, SK. The exception values have been determined using a bottom-up approach. It consists in the collection of information about country-specific single plants.
Comments on the inventory data of emissions:
- for the assessment of main characteristics (sulphur and ash content of coal, efficiency of the plant) and CO2 a bottom-up approach has been used. It consists in the collection of information about single plants.
- Halogene emissions have been estimated on the basis of the content of the species in the country-specific coal input mix, assuming average retention rates.
- For CO and particle emissions average values for the former UCTE are included (Union for the Coordination of the Transmission of Electricity, since 2009 replaced by ENTSO-E European Network of Transmission System Operators for Electricity).
- The country specific emissions of N2O depend on the share of DeNOx. - Emissions of trace elements were calculated by means of a formula (CORINAIR) using the ash content in the country-specific coal input mix and average transfer coefficients for coal power plants, taking into account the share of DeSOx installed.
- Emission of uranium and thorium radioactive isotopes were assumed proportional to the corresponding element emitted with particles; the other non-gaseous radioactive isotopes of the uranium and thorium decay chain were assumed proportional to the emitted U-238 or Th-232.
- The emission of gaseous radon and K-40 are taken from the literature.
IEA. 2009. Coal information, 2009 edition. Documentation for beyond 2020 files. International Energy Agency.
European Environment Agency (1991) CORINAIR Inventory; VOC"s Default Emission Factors
[This dataset is meant to replace the following datasets:]

## Included activities start
From the constructed lignite power plant ready to produce electricity.

From reception of lignite and operating materials at power plant gate.

## Included activities end
This activity ends with 1kWh of high voltage electricity produced at the power plant and arrived at the busbar.

This dataset includes:
- all operation and maintenance activities and materials of the power plants.

- Particle removal (dedusting of the flue gas)
- Desulfurisation and denitrification. These processes are described in separate modules; it can be decided by changing the values of NOx and SOx retained whether and how much DeNOx and DeSOx are installed.
- Cooling: It is assumed that all plants use wet cooling with a cooling tower. No cooling tower is included in this dataset (will be implemented in future versions)
- Loss of feed water
- Losses from gross electricity production, e.g. for internal use

This dataset doesn"t include
- raw materials extraction, decommissioning and waste treatment as these activities are already included in the infrastructure datasets
- transformation of the electricity produced
- The disposal of non-recycled ashes is modelled separately.
- Use of fuel oil for startup, as this can be neglected for lignite power plants because these are run for a long time (2-3 years) without being shut down.

## Technology
POWER PLANT:
Lignite power plant input is a dataset which consists of a mix of 30% 100MW power plant and 70% 500MW power plant. The plants are used for basic load with 6000 hours of operation at full capacity per year. The plants are assumed to operate 200000 hours during its lifetime.
OTHER DATA:
{{children_only_technology}}
- Share of installed capacity with desulfurisation: 20% (rough estimation based on sulfur mass balance
- Average efficiency of desulfurisation installations: 92% (rough estimation based on Dones et al. 2007
- Share of installed capacity with denitrification: 73% (figure based on IEA 2012 )
- Average efficiency of denitrification installations: 80% (estimation based on Dones et al. 2007, p.128. Valid for selective catalytic reaction systems)
- Share of installed capacity with particle filters: 98% (figure based on IEA 2012 )
- Average efficiency of particle filters: 98% (figure based on IEA 2012 )
Sources :
1) Victoria: http://new.dpi.vic.gov.au/energy-future/our-energy-story/energy-in-victoria/resources-in-victoria-map
2) Queensland: http://www.dme.qld.gov.au/Energy/power_stations.cfm
3) New South Wales: http://www.industry.nsw.gov.au/energy/electricity/generation
4) Map of Fossil Fuel Power Stations in Australia, DEWHA, http://www.ga.gov.au/fossil_fuel/
5) IEA 2012. Coal Power Database. International Energy Agency Clean Coal Centre, London
6) Australian National Pollutant Inventory, http://www.npi.gov.au/
7) IEA/OECD. 2010. Electricity Information 2010. International Energy Agency (IEA), Paris Cedex (FR). Part IV. Detailed OECD Electricity And Heat Data.
8) Dones, R., Bauer, C., Röder, A. (2007) Kohle. In: Dones, R. (Ed.) et al., Sachbilanzen von Energiesystemen: Grundlagen für den ökologischen Vergleich von Energiesystemen und den Einbezug von Energiesystemen in Ökobilanzen für die Schweiz. Final report ecoinvent No. 6-VI, Paul Scherrer Institut Villigen, Swiss Centre for Life Cycle Inventories, Dübendorf, CH.

## Time period
The Annual Production Volume is valid for the year 2013.

## Parameters
- efficiency: 0.367 dimensionless; lognormal variance with pedigree 0.003325, pedigree (3,2,1,2,2)
  Literature value/calculated value. Net electrical efficiency based on the lower heating value (LHV).
  For all OECD countries, the IEA Electricity information 2014 provides data for the year 2012 on fuel input (TJ, Net calorific value NCV) and gross electricity production (GWh) as well as heat production (TJ) in tables 8 and 9 for each country for electricity only and Combined Heat and Power (CHP) plants each. Together with the information on own use (see parameter "losses"), the net electrical efficiency based on the NCV is calculated.
  For all non-OECD countries, data from the IEA Energy balances of non-OECD countries 2014 have been used. These tables do not always provide information on how much of the electricity has been produced in electricity only and in CHP plants, but often give the total value only.
  IEA. 2014. Electricity Information 2014. ISBN 978-92-64-21692-1. International Energy Agency (IEA), Paris Cedex (FR).
  IEA/OECD. 2014. Energy balances of non-OECD countries 2014. International Energy Agency (IEA), Paris Cedex (FR).
  output relative to input (requires additional specification)
- factor: input of MJ for the production of 1 kWh: 9.80926 MJ/kWh; name factor_MJ_kWh; = 1*3.6/efficiency; lognormal variance with pedigree 0.522464, pedigree (1,1,1,1,1)
  Calculated value. 3.6 MJ = 1kWh.
  nan
- fraction, cooling water, to air: 0.0299662 dimensionless; name fraction_CW_to_air; = (WConsumption_EP_HC_recirculatingCS*recirculating_CS_fraction_from_allCS+WConsumption_EP_HC_once_through_andCP_CS*once_through_andCP_CS_fractio_from_allCS)/(WWithdrawal_EP_HC_recirculating_CS*recirculating_CS_fraction_from_allCS+WWithdrawal_EP_HC_once_through_andCP_CS*once_through_andCP_CS_fractio_from_allCS); lognormal variance with pedigree 0.092025, pedigree (4,4,3,2,4)
  Calculated
  nan
- fraction, process water, to air: 0.15 dimensionless; name fraction_PW_to_air; lognormal variance with pedigree 0.092025, pedigree (4,4,3,2,4)
  Literature value. In case when no industry/process specific data are available, default evaporation fraction value is used. This value is 15% and is based on literature (Statistics Canada, 2007 & Shaffer, K.H., 2008, Consumptive water use in the Great Lakes Basin, USGS & Shiklomanov, 2003, World Water Resources at the Beginning of the 21st Century) and has been approved by an expert.
  nan
- fraction, water, completely softened, to air: 0.15 dimensionless; name fraction_WCS_to_air; = fraction_PW_to_air; lognormal variance with pedigree 0.092025, pedigree (4,4,3,2,4)
  Calculated value. See comment in the other parametres present in this dataset. Water, completely softened is considered to be always used as process water, thus process water fractions to air are applied to all water, completely softened input flows to calculate the amount of water consumed in the processes.
  nan
- fraction, water, decarbonised, to air: 0.0299662 dimensionless; name fraction_WDC_to_air; = fraction_CW_to_air; lognormal variance with pedigree 0.092025, pedigree (4,4,3,2,4)
  Calculated value. See comments in the other parametres present in this dataset. Decarbonised water is considered to be always used as cooling water, thus cooling water fractions to air are applied to all carbonised water input flows to calculate the amount of water consumed in the processes.
  nan
- gross electricity production: 1.26123e10 kWh; name gross_electricity; lognormal variance with pedigree 0.001225, pedigree (2,1,1,2,1)
  Literature value/statistics. Taken from the IEA electricity information 2014, table 1.3.
  IEA. 2014. Electricity Information 2014. ISBN 978-92-64-21692-1. International Energy Agency (IEA), Paris Cedex (FR).
  nan
- losses from gross electricity production: 0.03 dimensionless; name gross_net_electricity; lognormal variance with pedigree 0.003525, pedigree (3,2,2,2,2)
  Assumption/Calculated value. Own use of electricity plants in this country in 2012. For the OECD countries, the OECD iLibrary provides gross and net electricity values for the specific sector "Total Fuel Combustion", from which the loss value is being calculated. This value is then applied to all fossil fuel datasets, as no data on a more detailed level were available. In this specific case, the resulting value was unrealistically low (only 1% own use), so that it was arbitrarily set to 3%.
  OECD. 2014. IEA Electricity Information Statistics: OECD - Electricity and heat generation. OECD iLibrary. Online database. DOI : 10.1787/elect-data-en
  nan
- once-through and cooling pond cooling systems as a fraction of all cooling syste: 0.625 dimensionless; name once_through_andCP_CS_fractio_from_allCS; lognormal variance with pedigree 0.092025, pedigree (4,4,3,2,4)
  Calculated as an average of data available for Europe (Floerke, 2008, Future changes of freshwater needs in the electricity production sector) and USA (NERL, 2011, Estimating freshwater needs to meet future thermoelectric generation requirements).
  nan
- recirculating cooling system as a fraction of all cooling systems: 0.375 dimensionless; name recirculating_CS_fraction_from_allCS; lognormal variance with pedigree 0.092025, pedigree (4,4,3,2,4)
  (same comment as for once-through and cooling pond cooling systems as a fraction of all coo)
- water consumption, electricity production from hard coal, once-through and cooli: 0.0014 m3/kWh; name WConsumption_EP_HC_once_through_andCP_CS; lognormal variance with pedigree 0.092025, pedigree (4,4,3,2,4)
  Estimated based on literature (Scown, 2011, Water Footprint of U.S. Transportation Fuels, SI). The amount of water consumed while burning lignite and peat is assumed to be the same as in case of coal.
  nan
- water consumption, electricity production from hard coal, recirculating CS: 0.0018 m3/kWh; name WConsumption_EP_HC_recirculatingCS; lognormal variance with pedigree 0.092025, pedigree (4,4,3,2,4)
  (same comment as for water consumption, electricity production from hard coal, once-through)
- water withdrawal, electricity production from hard coal, once-through and coolin: 0.0815 m3/kWh; name WWithdrawal_EP_HC_once_through_andCP_CS; lognormal variance with pedigree 0.092025, pedigree (4,4,3,2,4)
  Estimated based on literature (Scown, 2011, Water Footprint of U.S. Transportation Fuels, SI). The amount of water withdrawn while burning lignite and peat is assumed to be the same as in case of coal.
  nan
- water withdrawal, electricity production from hard coal, recirculating CS: 0.0021 m3/kWh; name WWithdrawal_EP_HC_recirculating_CS; lognormal variance with pedigree 0.092025, pedigree (4,4,3,2,4)
  (same comment as for water withdrawal, electricity production from hard coal, once-through )

## Reference product
- electricity, high voltage: 1 kWh; By-product classification allocatable product; CPC 17100: Electrical energy
  production volume 1.22339e10 kWh
  properties: carbon allocation 0 kg, carbon content 0, price 0.0977 EUR2005

## Inputs from technosphere
- NOx retained, by selective catalytic reduction: 0.00105 kg; lognormal variance with pedigree 0.0037, pedigree (3,2,3,1,2)
  properties: dry mass 1 kg, wet mass 1 kg
- SOx retained, in lignite flue gas desulfurisation: 0.00095 kg; lognormal variance with pedigree 0.0037, pedigree (3,2,3,1,2)
  properties: dry mass 1 kg, wet mass 1 kg
- lignite: 1.04959 kg; lognormal variance with pedigree 0.0152, pedigree (3,3,5,5,3)
  properties: carbon content, fossil 0.655, dry mass 0.42 kg, heating value, net 8.8 MJ, water content 1.38095, wet mass 1 kg
- lignite ash: -0.144196 kg; lognormal variance with pedigree 0.0926, pedigree (5,3,3,5,3)
  properties: dry mass 1 kg, heating value, net 21.7 MJ, wet mass 1 kg
- lignite power plant: 1e-11 unit; lognormal variance with pedigree 0.3626, pedigree (5,3,5,5,3)
- petroleum coke: 0.00136349 kg; lognormal variance with pedigree 0.0026, pedigree (2,1,3,5,1)
  properties: carbon content, fossil 0.885, dry mass 1 kg, heating value, net 35 MJ, wet mass 1 kg
- residue from cooling tower: -4.90463e-5 kg; lognormal variance with pedigree 0.0752, pedigree (5,3,3,5,2)
  properties: carbon content, fossil 0.0544233, dry mass 0.7 kg, water content 0.428571, wet mass 1 kg
- water, completely softened: 0.0588556 kg; lognormal variance with pedigree 0.048, pedigree (4,5,5,5,3)
  properties: wet mass 1 kg
- water, decarbonised: 1.96185 kg; lognormal variance with pedigree 0.048, pedigree (4,5,5,5,3)
  properties: wet mass 1 kg

## Inputs from nature
- Water, cooling, unspecified natural origin [natural resource, in water]: 0.0440438 m3; lognormal variance with pedigree 0.092025, pedigree (4,4,5,2,4)

## Emissions to nature
- Antimony ion [air, non-urban air or from high stacks]: 5.12044e-9 kg; lognormal variance with pedigree 0.7426, pedigree (5,3,5,5,3)
- Arsenic ion [air, non-urban air or from high stacks]: 2.90354e-8 kg; lognormal variance with pedigree 0.7426, pedigree (5,3,5,5,3)
- Barium II [air, non-urban air or from high stacks]: 1.52044e-7 kg; lognormal variance with pedigree 0.7426, pedigree (5,3,5,5,3)
- Benzene [air, non-urban air or from high stacks]: 2.12861e-6 kg; lognormal variance with pedigree 0.082, pedigree (3,5,5,5,3)
- Benzo(a)pyrene [air, non-urban air or from high stacks]: 1.96185e-12 kg; lognormal variance with pedigree 0.074, pedigree (3,5,5,5,1)
- Boron [air, non-urban air or from high stacks]: 1.83433e-5 kg; lognormal variance with pedigree 0.7426, pedigree (5,3,5,5,3)
- Bromine [air, non-urban air or from high stacks]: 6.48392e-7 kg; lognormal variance with pedigree 0.1746, pedigree (3,3,5,5,3)
- Butane [air, non-urban air or from high stacks]: 1.86376e-7 kg; lognormal variance with pedigree 0.074, pedigree (3,5,5,5,1)
- Cadmium II [air, non-urban air or from high stacks]: 6.59183e-9 kg; lognormal variance with pedigree 0.7426, pedigree (5,3,5,5,3)
- Carbon dioxide, fossil [air, non-urban air or from high stacks]: 1.04959 kg; lognormal variance with pedigree 0.0146, pedigree (3,3,5,5,3)
- Carbon monoxide, fossil [air, non-urban air or from high stacks]: 0.000196185 kg; lognormal variance with pedigree 0.668, pedigree (3,4,5,5,1)
- Chromium III [air, non-urban air or from high stacks]: 2.60926e-8 kg; lognormal variance with pedigree 0.7426, pedigree (5,3,5,5,3)
- Chromium VI [air, non-urban air or from high stacks]: 3.14877e-9 kg; lognormal variance with pedigree 0.4946, pedigree (3,3,5,5,3)
- Cobalt II [air, non-urban air or from high stacks]: 5.27738e-9 kg; lognormal variance with pedigree 0.7426, pedigree (5,3,5,5,3)
- Copper ion [air, non-urban air or from high stacks]: 7.25886e-8 kg; lognormal variance with pedigree 0.7426, pedigree (5,3,5,5,3)
- Dinitrogen monoxide [air, non-urban air or from high stacks]: 1.42234e-5 kg; lognormal variance with pedigree 0.068, pedigree (3,4,5,5,1)
- Dioxins, measured as 2,3,7,8-tetrachlorodibenzo-p-dioxin [air, non-urban air or from high stacks]: 6.86649e-14 kg; lognormal variance with pedigree 0.334, pedigree (3,5,5,5,1)
- Ethane [air, non-urban air or from high stacks]: 4.0218e-7 kg; lognormal variance with pedigree 0.074, pedigree (3,5,5,5,1)
- Formaldehyde [air, non-urban air or from high stacks]: 5.68937e-7 kg; lognormal variance with pedigree 0.074, pedigree (3,5,5,5,1)
- Hydrocarbons, aliphatic, alkanes, unspecified [air, non-urban air or from high stacks]: 2.14823e-6 kg; lognormal variance with pedigree 0.074, pedigree (3,5,5,5,1)
- Hydrocarbons, aliphatic, unsaturated [air, non-urban air or from high stacks]: 2.1188e-6 kg; lognormal variance with pedigree 0.074, pedigree (3,5,5,5,1)
- Hydrochloric acid [air, non-urban air or from high stacks]: 5.54223e-5 kg; lognormal variance with pedigree 0.2126, pedigree (5,3,5,5,3)
- Hydrogen fluoride [air, non-urban air or from high stacks]: 1.32425e-5 kg; lognormal variance with pedigree 0.2126, pedigree (5,3,5,5,3)
- Iodine [air, non-urban air or from high stacks]: 4.70845e-7 kg; lognormal variance with pedigree 0.2126, pedigree (5,3,5,5,3)
- Lead II [air, non-urban air or from high stacks]: 2.55041e-8 kg; lognormal variance with pedigree 0.7426, pedigree (5,3,5,5,3)
- Lead-210 [air, non-urban air or from high stacks]: 8.21035e-5 kBq; lognormal variance with pedigree 0.3926, pedigree (5,3,5,5,3)
- Manganese II [air, non-urban air or from high stacks]: 8.29864e-8 kg; lognormal variance with pedigree 0.7426, pedigree (5,3,5,5,3)
- Mercury II [air, non-urban air or from high stacks]: 5.30681e-8 kg; lognormal variance with pedigree 0.7426, pedigree (5,3,5,5,3)
- Methane, fossil [air, non-urban air or from high stacks]: 9.80926e-6 kg; lognormal variance with pedigree 0.068, pedigree (3,4,5,5,1)
- Molybdenum VI [air, non-urban air or from high stacks]: 1.57929e-8 kg; lognormal variance with pedigree 0.7426, pedigree (5,3,5,5,3)
- Nickel II [air, non-urban air or from high stacks]: 1.00054e-7 kg; lognormal variance with pedigree 0.7426, pedigree (5,3,5,5,3)
- Nitrogen oxides [air, non-urban air or from high stacks]: 0.00158 kg; lognormal variance with pedigree 0.0037, pedigree (3,2,3,1,2)
- PAH, polycyclic aromatic hydrocarbons [air, non-urban air or from high stacks]: 9.80926e-9 kg; lognormal variance with pedigree 0.334, pedigree (3,5,5,5,1)
- Particulate Matter, < 2.5 um [air, non-urban air or from high stacks]: 3.25e-5 kg; lognormal variance with pedigree 0.0602, pedigree (4,2,5,3,4)
- Particulate Matter, > 10 um [air, non-urban air or from high stacks]: 2e-5 kg; lognormal variance with pedigree 0.0602, pedigree (4,2,5,3,4)
- Particulate Matter, > 2.5 um and < 10um [air, non-urban air or from high stacks]: 4e-5 kg; lognormal variance with pedigree 0.0602, pedigree (4,2,5,3,4)
- Pentane [air, non-urban air or from high stacks]: 1.44196e-6 kg; lognormal variance with pedigree 0.074, pedigree (3,5,5,5,1)
- Polonium-210 [air, non-urban air or from high stacks]: 0.000150082 kBq; lognormal variance with pedigree 0.3926, pedigree (5,3,5,5,3)
- Potassium-40 [air, non-urban air or from high stacks]: 2.84469e-5 kBq; lognormal variance with pedigree 0.3926, pedigree (5,3,5,5,3)
- Propane [air, non-urban air or from high stacks]: 3.43324e-7 kg; lognormal variance with pedigree 0.074, pedigree (3,5,5,5,1)
- Propene [air, non-urban air or from high stacks]: 1.56948e-7 kg; lognormal variance with pedigree 0.074, pedigree (3,5,5,5,1)
- Radium-226 [air, non-urban air or from high stacks]: 2.1188e-5 kBq; lognormal variance with pedigree 0.3907, pedigree (3,3,5,3,3)
- Radium-228 [air, non-urban air or from high stacks]: 1.2654e-5 kBq; lognormal variance with pedigree 0.3926, pedigree (5,3,5,5,3)
- Radon-220 [air, non-urban air or from high stacks]: 0.00124578 kBq; lognormal variance with pedigree 0.3926, pedigree (5,3,5,5,3)
- Radon-222 [air, non-urban air or from high stacks]: 0.00220708 kBq; lognormal variance with pedigree 0.3926, pedigree (5,3,5,5,3)
- Selenium IV [air, non-urban air or from high stacks]: 1.20654e-7 kg; lognormal variance with pedigree 0.7426, pedigree (5,3,5,5,3)
- Strontium [air, non-urban air or from high stacks]: 1.34387e-7 kg; lognormal variance with pedigree 0.7426, pedigree (5,3,5,5,3)
- Sulfur dioxide [air, non-urban air or from high stacks]: 0.00316 kg; lognormal variance with pedigree 0.0037, pedigree (3,2,3,1,2)
- Thorium-228 [air, non-urban air or from high stacks]: 6.83706e-6 kBq; lognormal variance with pedigree 0.3926, pedigree (5,3,5,5,3)
- Thorium-232 [air, non-urban air or from high stacks]: 1.07902e-5 kBq; lognormal variance with pedigree 0.3926, pedigree (5,3,5,5,3)
- Toluene [air, non-urban air or from high stacks]: 1.06921e-6 kg; lognormal variance with pedigree 0.074, pedigree (3,5,5,5,1)
- Uranium-238 [air, non-urban air or from high stacks]: 1.76567e-5 kBq; lognormal variance with pedigree 0.3926, pedigree (5,3,5,5,3)
- Vanadium V [air, non-urban air or from high stacks]: 3.30572e-8 kg; lognormal variance with pedigree 0.7426, pedigree (5,3,5,5,3)
- Water [air, unspecified]: 0.00138744 m3; lognormal variance with pedigree 0.092025, pedigree (4,4,5,2,4)
- Xylene [air, non-urban air or from high stacks]: 9.04414e-6 kg; lognormal variance with pedigree 0.074, pedigree (3,5,5,5,1)
- Zinc II [air, non-urban air or from high stacks]: 1.70681e-7 kg; lognormal variance with pedigree 0.7426, pedigree (5,3,5,5,3)
- Water [water, unspecified]: 0.044677 m3; lognormal variance with pedigree 0.092025, pedigree (4,4,5,2,4)

## Sampling procedure
literature and statistics

## Extrapolations
This is a child from the global dataset. Only annual production volume and DQI have been modified.

Data from 1993 have been updated for year 2000. No changes were made for the 2008 dataset, but uncertainty was adjusted.

Most of the exchanges were extrapolated through production-weighted averages of the datasets of the following 10 countries: AT, BA, CZ, DE, ES, FR, HU, PL, SI, SK.

The original data were valid for the burning of 1MJ of lignite. In this dataset, the values are scaled to the net output of 1kWh of electricity, based on the electrical efficiency.
