# furnace production, logs, softwood storage area, 100kW

Dataset: EcoSpold 2, unit process
Geography: RoW
Time period: 2000-01-01 to 2022-12-31
Technology level: current
Classification: EcoSpold01Categories: wood energy/heating systems
Classification: ISIC rev.4 ecoinvent: 2815:Manufacture of ovens, furnaces and furnace burners
Tags: ConvertedDataset
Scenario: Business-as-Usual
System model: Substitution, consequential, long-term
Generated by: Christian Bauer
Published in: Bauer, C. 2007
Database: ecoinvent
isCopyrightProtected: true
accessRestrictedTo: 1

## General comment
Assumed lifetime: furnace 15 years; chimney 80 years. Operation time 1600 h/a.
[This dataset was already contained in the ecoinvent database version 2. It was not individually updated during the transfer to ecoinvent version 3. Life Cycle Impact Assessment results may still have changed, as they are affected by changes in the supply chain, i.e. in other datasets. This dataset was generated following the ecoinvent quality guidelines for version 2. It may have been subject to central changes described in the ecoinvent version 3 change report (http://www.ecoinvent.org/database/ecoinvent-version-3/reports-of-changes/), and the results of the central updates were reviewed extensively. The changes added e.g. consistent water flows and other information throughout the database. The documentation of this dataset can be found in the ecoinvent reports of version 2, which are still available via the ecoinvent website. The change report linked above covers all central changes that were made during the conversion process.]

## Included activities end
Includes the most important materials used for the fabrication of the furnace, the water storage, and the chimney: steel, concrete, rock wool, aluminum, cast iron, plastics, lubricating oil. Also includes the surface for furnace and wood storage, transports and energy used for the construction and the disposal of the furnace.

## Geography
Could be used for central European conditions.

## Technology
Boiler of average technology available on market.

## Time period
Some data used to calculate averages are from the second half of the 1990´s.

## Reference product
- furnace, logs, softwood storage area, 100kW: 1 unit; By-product classification allocatable product; CPC 43420: Industrial or laboratory furnaces and ovens, except non-electric bakery ovens; other industrial or laboratory […]
  production volume 3.96633 unit
  properties: carbon allocation 0 kg, carbon content 0, price 7542 EUR2005

## Inputs from technosphere
- aluminium, wrought alloy: 0.25 kg; lognormal variance with pedigree 0.022, pedigree (1,1,5,5,1)
  properties: dry mass 1 kg, wet mass 1 kg
- cast iron: 18 kg; lognormal variance with pedigree 0.022, pedigree (1,1,5,5,1)
  properties: carbon content, fossil 0.04, dry mass 1 kg, wet mass 1 kg
- concrete, normal strength: 0.00817566, 0.000851893, 0.000739914, 0.000554109, 0.0164281, 0.00387938, 0.292474, 0.00689667 m3 (8 suppliers, which the file names only by identifier); sum of these 0.33 m3; lognormal variance with pedigree 0.022, pedigree (1,1,5,5,1)
  properties: dry mass 2190 kg, water content 0.086758, wet mass 2380 kg
- copper, cathode: 8.1 kg; lognormal variance with pedigree 0.022, pedigree (1,1,5,5,1)
  properties: dry mass 1 kg, wet mass 1 kg
- drawing of pipe, steel: 5.5 kg; lognormal variance with pedigree 0.122, pedigree (1,1,5,5,1)
- electricity, low voltage: 26.6429, 9.68545, 1.98089, 7.88008, 56.8113, 52.8906, 474.248, 65.8605 kWh (8 suppliers, which the file names only by identifier); sum of these 696 kWh; lognormal variance with pedigree 0.022, pedigree (1,1,5,5,1)
- heat, central or small-scale, other than natural gas: 1796.16, 3.83998 MJ (2 suppliers, which the file names only by identifier); sum of these 1800 MJ; lognormal variance with pedigree 0.022, pedigree (1,1,5,5,1)
  properties: heating value, net 1 MJ
- lubricating oil: 1.5 kg; lognormal variance with pedigree 0.022, pedigree (1,1,5,5,1)
  properties: carbon content, fossil 0.75, dry mass 1 kg, heating value, net 40.2 MJ, wet mass 1 kg
- polyethylene, high density, granulate: 1.7 kg; lognormal variance with pedigree 0.022, pedigree (1,1,5,5,1)
  properties: carbon content, fossil 0.857143, dry mass 1 kg, heating value, net 42.47 MJ, wet mass 1 kg
- polyurethane, rigid foam: 32 kg; lognormal variance with pedigree 0.022, pedigree (1,1,5,5,1)
  properties: carbon content, fossil 0.69089, dry mass 1 kg, heating value, net 30.67 MJ, wet mass 1 kg
- sheet rolling, steel: 5.5 kg; lognormal variance with pedigree 0.122, pedigree (1,1,5,5,1)
- steel, low-alloyed, hot rolled: 1050 kg; lognormal variance with pedigree 0.022, pedigree (1,1,5,5,1)
  properties: carbon content, fossil 0.005, dry mass 1 kg, wet mass 1 kg
- stone wool: 11 kg; lognormal variance with pedigree 0.022, pedigree (1,1,5,5,1)
  properties: carbon content, fossil 0.015401, dry mass 1 kg, wet mass 1 kg
- waste concrete: -49.6178, -676.382 kg (2 suppliers, which the file names only by identifier); sum of these -726 kg; lognormal variance with pedigree 0.022, pedigree (1,1,1,5,1)
  properties: dry mass 0.5 kg, water content 1, wet mass 1 kg
- waste mineral oil: -1.08545, -0.414554 kg (2 suppliers, which the file names only by identifier); sum of these -1.5 kg; lognormal variance with pedigree 0.022, pedigree (1,1,1,5,1)
  properties: carbon content, fossil 0.864444, dry mass 0.9 kg, heating value, net 34.7 MJ, water content 0.111111, wet mass 1 kg
- waste mineral wool, for final disposal: -452.281, -597.719 kg (2 suppliers, which the file names only by identifier); sum of these -1050 kg; lognormal variance with pedigree 0.022, pedigree (1,1,1,5,1)
  properties: dry mass 1 kg, wet mass 1 kg
- waste polyethylene: -1.32388, -0.0126357, -0.00521899, -0.00210841, -0.189111, -0.000955616, -0.00495592, -0.161131 kg (8 suppliers, which the file names only by identifier); sum of these -1.7 kg; lognormal variance with pedigree 0.022, pedigree (1,1,1,5,1)
  properties: carbon content, fossil 0.825301, dry mass 0.996 kg, heating value, net 42.47 MJ, water content 0.00401606, wet mass 1 kg
- waste polyurethane: -3.03306, -0.0179881, -0.0932878, -3.55974, -24.9201, -0.0982398, -0.237848, -0.0396877 kg (8 suppliers, which the file names only by identifier); sum of these -32 kg; lognormal variance with pedigree 0.022, pedigree (1,1,1,5,1)
  properties: carbon content, fossil 0.641283, dry mass 0.998 kg, heating value, net 30.67 MJ, water content 0.00200401, wet mass 1 kg

## Inputs from nature
- Occupation, industrial area [natural resource, land]: 555 m2*year; lognormal variance with pedigree 0.15, pedigree (4,5,5,5,1)
- Transformation, from unspecified [natural resource, land]: 37 m2; lognormal variance with pedigree 0.15, pedigree (4,5,5,5,1)
- Transformation, to industrial area [natural resource, land]: 37 m2; lognormal variance with pedigree 0.15, pedigree (4,5,5,5,1)

## Sampling procedure
literature, personal communication

## Extrapolations
none This dataset has been copied from an original dataset covering the geography CH. The uncertainty has been adjusted accordingly.

## Review by Christian Bauer 2003-07-25
self-validation
