# glass etching factory construction

Dataset: EcoSpold 2, unit process
Geography: RoW
Time period: 2002-01-01 to 2022-12-31
Technology level: current
Classification: EcoSpold01Categories: glass/construction
Classification: ISIC rev.4 ecoinvent: 4100:Construction of buildings
Tags: ConvertedDataset
Scenario: Business-as-Usual
System model: Substitution, consequential, long-term
Generated by: Niels Jungbluth
Published in: Kellenberger D. 2007
Database: ecoinvent
isCopyrightProtected: true
accessRestrictedTo: 1

## General comment
Infrastructure of a glass etching plant.
[This dataset was already contained in the ecoinvent database version 2. It was not individually updated during the transfer to ecoinvent version 3. Life Cycle Impact Assessment results may still have changed, as they are affected by changes in the supply chain, i.e. in other datasets. This dataset was generated following the ecoinvent quality guidelines for version 2. It may have been subject to central changes described in the ecoinvent version 3 change report (http://www.ecoinvent.org/database/ecoinvent-version-3/reports-of-changes/), and the results of the central updates were reviewed extensively. The changes added e.g. consistent water flows and other information throughout the database. The documentation of this dataset can be found in the ecoinvent reports of version 2, which are still available via the ecoinvent website. The change report linked above covers all central changes that were made during the conversion process.]

## Included activities end
Infrastructure of a glass etching plant with data for land use and area of buildings. No data for machinery. Annual capacity normalized to 100000 m2/a.

## Geography
Production plant in DK. Building background data from CH.

## Technology
Infrastructure of a plant for the anti reflex etching process.

## Time period
Date of estimation.

## Reference product
- glass etching factory: 1 unit; By-product classification allocatable product; CPC 53269: Other constructions for manufacturing
  production volume 3.97745 unit
  properties: carbon allocation 0 kg, carbon content 0, price 167939 EUR2005

## Inputs from technosphere
- building, hall: 1200 m2; lognormal variance with pedigree 0.3021, pedigree (1,2,5,5,1)

## Inputs from nature
- Occupation, industrial area [natural resource, land]: 540000 m2*year; lognormal variance with pedigree 0.0421, pedigree (1,2,5,5,1)
- Transformation, from unspecified [natural resource, land]: 6000 m2; lognormal variance with pedigree 0.1221, pedigree (1,2,5,5,1)
- Transformation, to industrial area [natural resource, land]: 6000 m2; lognormal variance with pedigree 0.1221, pedigree (1,2,5,5,1)

## Sampling procedure
Questionnaire.

## Extrapolations
none This dataset has been copied from an original dataset covering the geography DK. The uncertainty has been adjusted accordingly.

## Review by Daniel Kellenberger (obsolete) 2003-06-13
passed
