# cadmium telluride production, semiconductor-grade

Dataset: EcoSpold 2, unit process
Geography: RoW
Time period: 1985-01-01 to 2022-12-31
Technology level: current
Classification: ISIC rev.4 ecoinvent: 2011:Manufacture of basic chemicals
Synonyms: Cadmium monotelluride; Cadmium telluride (CdTe); Cadmium telluride; 1306-25-8; EINECS 215-149-9; Irtran 6; CdTe cpd
Scenario: Business-as-Usual
System model: Substitution, consequential, long-term
Generated by: Matthias Tuchschmid (obsolete)
Published in: Classen M. 2009
Database: ecoinvent
isCopyrightProtected: true
accessRestrictedTo: 1

## General comment
This dataset describes the production of high-grade cadmium telluride (99.999%) from cadmium and tellurium. Cadmium telluride (CdTe) is a basic component of thin film solar cells and is used as a several-micrometer thin coating. Another application is the use of CdTe for optical infrared devices (alloyed with mercury) or a solid-state x-ray and gamma ray detector (alloyed with zinc). This dataset is based on literature and assumptions.
References:
Classen M., Althaus H.-J., Blaser S., Tuchschmid M., Jungbluth N., Doka G., Faist Emmenegger M. and Scharnhorst W. (2009) Life Cycle Inventories of Metals. Final report ecoinvent data v2.1, No 10. EMPA Dübendorf, Swiss Centre for Life Cycle Inventories, Dübendorf, CH.

## Included activities start
The activity starts when the raw materials enter the process.

## Included activities end
This activity ends with the production of cadmium telluride. The consumption of raw materials and energy are taken into account. The emissions are estimated.

## Geography
Production in US. The data are assumed to be representative of the global production.

## Technology
Production of cadmium telluride from cadmium and tellurium. Harman (1985) reports the preparation of CdTe for substrates: “Elements are sealed in evacuated, carbon-coated quartz tubes. The capsule is placed in a single furnace which is initially in a nearly horizontal position. A slight tilt in the furnace keeps the liquid and solid material at the small diameter end of the tube. The temperature of the furnace is raised to its final temperature of about 1110°C, at the conical tip end approximately 100°C lower. The temperature of the growth tube is held for about 16 to 20hrs, then the furnace is rotated about 90° to a vertical position. After the temperature is stabilized, the tube is lowered at a rate of about 1.2mm/hr until the solution has completely solidified.”
Reference(s):
Classen M., Althaus H.-J., Blaser S., Tuchschmid M., Jungbluth N., Doka G., Faist Emmenegger M. and Scharnhorst W. (2009) Life Cycle Inventories of Metals. Final report ecoinvent data v2.1, No 10. EMPA Dübendorf, Swiss Centre for Life Cycle Inventories, Dübendorf, CH.
Harman T. (1985) Process for making mercury cadmium telluride. Patent Number U.S. 4642142.

## Time period
Time of patents.

## Reference product
- cadmium telluride, semiconductor-grade: 1 kg; By-product classification allocatable product; CPC 342: Basic inorganic chemicals n.e.c.
  production volume 4138.78 kg
  properties: carbon allocation 0 kg, carbon content 0, carbon content, fossil 0, carbon content, non-fossil 0, dry mass 1 kg, price 20.413 EUR2005, water content 0, water in wet mass 0 kg, wet mass 1 kg

## Inputs from technosphere
- cadmium, semiconductor-grade: 0.49298 kg; lognormal variance with pedigree 0.3102, pedigree (5,5,5,5,5)
  properties: dry mass 1 kg, wet mass 1 kg
- chemical factory, organics: 4e-10 unit; lognormal variance with pedigree 0.3098, pedigree (2,3,5,4,3)
- electricity, medium voltage: 1.11432, 0.206347, 0.0416926, 0.529718, 9.19391, 0.0413782, 0.170614, 1.13802 kWh (8 suppliers, which the file names only by identifier); sum of these 12.436 kWh; lognormal variance with pedigree 0.1006, pedigree (5,3,5,5,3)
- tellurium, semiconductor-grade: 0.55965 kg; lognormal variance with pedigree 0.3102, pedigree (5,5,5,5,5)
  properties: dry mass 1 kg, wet mass 1 kg

## Emissions to nature
- Cadmium II [air, urban air close to ground]: 6e-6 kg; lognormal variance with pedigree 0.7082, pedigree (5,5,5,5,3)

## Sampling procedure
Literature and estimations.

## Extrapolations
Emissions of cadmium into the air are extrapolated from cadmium purification. This dataset has been copied from an original dataset covering the geography US. The uncertainty has been adjusted accordingly.

## Review by Emilia Moreno Ruiz 2017-08-09
This dataset was additionally reviewed in a separate review process by Eric Johnson of Atlantic Consulting as well as Emilia Moreno Ruiz and Gregor Wernet of ecoinvent.
