# reinforcing steel production

Dataset: EcoSpold 2, unit process
Geography: Europe without Austria
Time period: 2000-01-01 to 2022-12-31
Technology level: current
Classification: ISIC rev.4 ecoinvent: 2410:Manufacture of basic iron and steel
Classification: EcoSpold01Categories: metals/extraction
Synonyms: unalloyed steel; carbon steel
Scenario: Business-as-Usual
System model: Substitution, consequential, long-term
Generated by: Lucia Valsasina
Published in: Classen M. 2009
Database: ecoinvent
isCopyrightProtected: true
accessRestrictedTo: 1

## General comment
represents Average of World and European production mix. This is assumed to correspond to the consumption mix in Europe
[This dataset was already contained in the ecoinvent database version 2. It was not individually updated during the transfer to ecoinvent version 3. Life Cycle Impact Assessment results may still have changed, as they are affected by changes in the supply chain, i.e. in other datasets. This dataset was generated following the ecoinvent quality guidelines for version 2. It may have been subject to central changes described in the ecoinvent version 3 change report (http://www.ecoinvent.org/database/ecoinvent-version-3/reports-of-changes/), and the results of the central updates were reviewed extensively. The changes added e.g. consistent water flows and other information throughout the database. The documentation of this dataset can be found in the ecoinvent reports of version 2, which are still available via the ecoinvent website. The change report linked above covers all central changes that were made during the conversion process.]
[This dataset is meant to replace the following datasets:
- reinforcing steel production, RER, 2000 - 2002]

## Included activities end
Mix of differently produced steels and hot rolling

## Geography
Data relate to plants in the EU

## Technology
technology mix

## Reference product
- reinforcing steel: 1 kg; By-product classification allocatable product; CPC 4124: Bars and rods, hot-rolled, of iron or steel
  production volume 2.0299e10 kg
  properties: carbon allocation 0.004 kg, carbon content 0.004, carbon content, fossil 0.004, carbon content, non-fossil 0, dry mass 1 kg, heating value, net 0 MJ, price 0.5369 EUR2005, water content 0, water in wet mass 0 kg, wet mass 1 kg

## Inputs from technosphere
- hot rolling, steel: 1 kg; lognormal variance with pedigree 0, pedigree (1,1,5,1,1)
- steel, low-alloyed: 0.37 kg; lognormal variance with pedigree 0.0015, pedigree (2,3,5,3,1)
  properties: carbon content, fossil 0.005, dry mass 1 kg, wet mass 1 kg
- steel, unalloyed: 0.63 kg; lognormal variance with pedigree 0.0015, pedigree (2,3,5,3,1)
  properties: carbon content, fossil 0.0025, dry mass 1 kg, wet mass 1 kg

## Sampling procedure
literature, statistics
