# mine construction, open cast, ilmenite from hard-rock ore

Dataset: EcoSpold 2, unit process
Geography: GLO
Time period: 2005-01-01 to 2022-12-31
Technology level: current
Classification: ISIC rev.4 ecoinvent: 4290:Construction of other civil engineering projects
Classification: EcoSpold01Categories: construction materials/additives
Synonyms: quarry
Scenario: Business-as-Usual
System model: Substitution, consequential, long-term
Generated by: Tereza Levova
Database: ecoinvent
isCopyrightProtected: true
accessRestrictedTo: 1

## General comment
Data are estimated from air-picture of the Tellnes mine in Norway. The mine has an annual yield of about 550'000 t of ilemnite and approximatelly the same amount of magnetite.

## Included activities end
Includes the "land-use" of the built part of the mine and therefore the production places and the paved roads

## Geography
Data are based on one mine in Norway. The production of ilmenite from hard rock ore from this mine represents 85% of the total world production of ilmenite from hard rock ore.

## Reference product
- mine infrastructure, open cast, ilmenite from hard-rock ore: 1 unit; By-product classification allocatable product; CPC 53261: Mining constructions
  production volume 0.02 unit
  properties: carbon allocation 0 kg, carbon content 0, lifetime 100 year, lifetime capacity [kg] 1.33656e11 kg, price 1.39939e7 EUR2005

## Inputs from technosphere
- building, hall: 7910 m2; lognormal variance with pedigree 0.3086, pedigree (4,3,3,1,1)
- building, multi-storey: 118650 m3; lognormal variance with pedigree 0.3086, pedigree (4,3,3,1,1)

## Inputs from nature
- Occupation, industrial area [natural resource, land]: 1.582e6 m2*year; lognormal variance with pedigree 0.0486, pedigree (4,3,3,1,1)
- Occupation, traffic area, road network [natural resource, land]: 1.091e6 m2*year; lognormal variance with pedigree 0.0486, pedigree (4,3,3,1,1)
- Transformation, from forest, unspecified [natural resource, land]: 26730 m2; lognormal variance with pedigree 0.1286, pedigree (4,3,3,1,1)
- Transformation, to industrial area [natural resource, land]: 15820 m2; lognormal variance with pedigree 0.1286, pedigree (4,3,3,1,1)
- Transformation, to traffic area, road network [natural resource, land]: 10910 m2; lognormal variance with pedigree 0.1301, pedigree (4,2,3,5,1)

## Sampling procedure
literature
