# lorry production, 28 metric ton

Dataset: EcoSpold 2, unit process
Geography: RoW
Time period: 1998-01-01 to 2022-12-31
Technology level: current
Classification: ISIC rev.4 ecoinvent: 2910:Manufacture of motor vehicles
Classification: EcoSpold01Categories: transport systems/road
Scenario: Business-as-Usual
System model: Substitution, consequential, long-term
Generated by: Michael Spielmann (obsolete)
Published in: Spielmann M. 2007
Database: ecoinvent
isCopyrightProtected: true
accessRestrictedTo: 1

## General comment
Based on "lorry production, 28 metric ton, RER2002". Material consumption values refer to the production of one average lorry in the referring weight class (net weight 10200t). Total Kilometric performance: 5.40E+05. Interventions for manufacturing processes of vehicles are independent of weight class. The disposal of lorry is included too.

## Included activities start
The dataset starts with the material used for the production of the lorry.

## Included activities end
The inventory includes processes of material, energy and water use in vehicle manufacturing (final assembly, engine production and manufacturing of metal parts). Rail and road transport of materials is accounted for. Plant infrastructure is included, addressing issues such as land use, building, road and parking construction. Vehicle disposal is as well included.

## Geography
Extrapolated from "lorry production, 28 metric ton, RER2002". Vehicle manufacturing data are taken from one production site in Germany.

## Technology
Current production technology, environmental issues have been addressed in the past.

## Time period
The material consumption represents a current vehicle FH. Data has been adjusted for 28 t vehicle.The data for vehicle production are representative for lorry production of one German company with an environmental management system. The data includes the final assembly (2000), engine production (2002) and the manufacturing of metal parts (2002).
References:
Volvo Truck Corporation (2004) Environmental product declaration: Volvo 8500 Low-Entry. Download of March from http://www.volvo.com/bus/global/en-gb/volvogroup/core+values/environment/downloads.htm.
MAN Nutzfahrzeuge AG (2000) Umwelterklärung 1999. MAN Nutzfahrzeuge AG, München
MAN Nutzfahrzeuge AG (2002) Umwelterklärung 2002. MAN Nutzfahrzeuge AG, München
Doka G. (2003) Life Cycle Inventories of Waste Treatment Services. Final report ecoinvent 2000 No. 13. EMPA St. Gallen, Swiss Centre for Life Cycle Inventories, Duebendorf, CH, Online-Version under: www.ecoinvent.ch.
Frischknecht R. and Jungbluth N. (2003) Code of Practice. Final report ecoinvent 2000 No. 2. ESU-services, Uster, Swiss Centre for Life Cycle Inventories, Duebendorf, CH, Online-Version under: www.ecoinvent.ch.

## Parameters
- fraction, process water, to air: 0.15 dimensionless; name fraction_PW_to_air; lognormal variance with pedigree 0.092025, pedigree (4,4,3,2,4)
  Literature value. In case when no industry/process specific data are available, default evaporation fraction value is used. This value is 15% and is based on literature (Statistics Canada, 2007 & Shaffer, K.H., 2008, Consumptive water use in the Great Lakes Basin, USGS & Shiklomanov, 2003, World Water Resources at the Beginning of the 21st Century) and has been approved by an expert.
- fraction, tap water, to air: 0.15 dimensionless; name fraction_TW_to_air; = fraction_PW_to_air; lognormal variance with pedigree 0.092025, pedigree (4,4,3,2,4)
  Calculated value. See comment in the other parametres present in this dataset. Tap water is considered to be always used as process water, thus process water fractions to air are applied to all tap water input flows to calculate the amount of water consumed in the processes.

## Reference product
- lorry, 28 metric ton: 1 unit; By-product classification allocatable product; CPC 49114: Motor vehicles n.e.c. for the transport of goods
  production volume 2.67763 unit
  properties: carbon allocation 0 kg, carbon content 0, price 32580 EUR2005

## Inputs from technosphere
- acetic acid, without water, in 98% solution state: 0.066 kg; lognormal variance with pedigree 0.012, pedigree (1,1,5,5,1)
  properties: carbon content, fossil 0.400016, dry mass 1 kg, heating value, net 14.6 MJ, wet mass 1 kg
- alkyd paint, white, without solvent, in 60% solution state: 65.3 kg; lognormal variance with pedigree 0.042, pedigree (1,1,5,5,1)
  properties: carbon content, fossil 0.140367, carbon content, non-fossil 0.199629, dry mass 1 kg, heating value, net 10.3 MJ, wet mass 1 kg
- aluminium, cast alloy: 112.32 kg; lognormal variance with pedigree 0.122, pedigree (1,1,5,5,1)
  properties: dry mass 1 kg, wet mass 1 kg
- aluminium, wrought alloy: 238.68 kg; lognormal variance with pedigree 0.122, pedigree (1,1,5,5,1)
  properties: dry mass 1 kg, wet mass 1 kg
- brass: 32.6 kg; lognormal variance with pedigree 0.122, pedigree (1,1,5,5,1)
  properties: dry mass 1 kg, wet mass 1 kg
- cast iron: 1800 kg; lognormal variance with pedigree 0.042, pedigree (1,1,5,5,1)
  properties: carbon content, fossil 0.04, dry mass 1 kg, wet mass 1 kg
- copper, cathode: 49 kg; lognormal variance with pedigree 0.122, pedigree (1,1,5,5,1)
  properties: dry mass 1 kg, wet mass 1 kg
- diesel: 7.15479, 1.01146, 142.588, 0.34396, 1.46195, 14.44 kg (6 suppliers, which the file names only by identifier); sum of these 167 kg; lognormal variance with pedigree 0.302, pedigree (1,1,5,5,1)
  properties: carbon content, fossil 0.865, dry mass 1 kg, heating value, net 42.8 MJ, wet mass 1 kg
- diesel, burned in building machine: 20.1 MJ; lognormal variance with pedigree 0.302, pedigree (1,1,5,5,1)
  properties: heating value, net 1 MJ
- electricity, medium voltage: 451.714, 16.9009, 214.732, 3726.94, 312.942, 16.7735 kWh (6 suppliers, which the file names only by identifier); sum of these 4740 kWh; lognormal variance with pedigree 0.012, pedigree (1,1,5,5,1)
- electronics, for control units: 49 kg; lognormal variance with pedigree 0.012, pedigree (1,1,5,5,1)
  properties: carbon content, fossil 0.337146, carbon content, non-fossil 0.00013442, dry mass 1 kg, wet mass 1 kg
- flat glass, uncoated: 73.4 kg; lognormal variance with pedigree 0.042, pedigree (1,1,5,5,1)
  properties: dry mass 1 kg, wet mass 1 kg
- heat, district or industrial, natural gas: 4255.41, 28044.6 MJ (2 suppliers, which the file names only by identifier); sum of these 32300 MJ; lognormal variance with pedigree 0.012, pedigree (1,1,5,5,1)
  properties: heating value, net 1 MJ
- heat, district or industrial, other than natural gas: 1.50032, 859.2 MJ (2 suppliers, which the file names only by identifier); sum of these 860.7 MJ; lognormal variance with pedigree 0.012, pedigree (1,1,5,5,1)
  properties: heating value, net 1 MJ
- hydrochloric acid, without water, in 30% solution state: 0.189 kg; lognormal variance with pedigree 0.012, pedigree (1,1,5,5,1)
  properties: dry mass 1 kg, heating value, net 3.32 MJ, wet mass 1 kg
- lead: 73.62 kg; lognormal variance with pedigree 0.012, pedigree (1,1,5,5,1)
  properties: dry mass 1 kg, wet mass 1 kg
- lime, hydrated, packed: 0.31 kg; lognormal variance with pedigree 0.2106, pedigree (5,5,5,5,5)
  properties: dry mass 0.997 kg, water content 0.00300903, wet mass 1 kg
- lubricating oil: 100 kg; lognormal variance with pedigree 0.122, pedigree (1,1,5,5,1)
  properties: carbon content, fossil 0.75, dry mass 1 kg, heating value, net 40.2 MJ, wet mass 1 kg
- nitric acid, without water, in 50% solution state: 0.0189761, 0.0115149, 0.00311633, 0.00461325, 0.00551734, 0.00463038, 0.0149748, 0.0351569 kg (8 suppliers, which the file names only by identifier); sum of these 0.0985 kg; lognormal variance with pedigree 0.012, pedigree (1,1,5,5,1)
  properties: dry mass 1 kg, wet mass 1 kg
- pig iron: 2940 kg; lognormal variance with pedigree 0.042, pedigree (1,1,5,5,1)
  properties: carbon content, fossil 0.045, dry mass 1 kg, wet mass 1 kg
- pitch: 0.102327, 0.050439, 0.885023, 0.0746788, 2.28286, 12.9047 kg (6 suppliers, which the file names only by identifier); sum of these 16.3 kg; lognormal variance with pedigree 0.012, pedigree (1,1,5,5,1)
  properties: carbon content, fossil 0.83, dry mass 1 kg, heating value, net 28 MJ, wet mass 1 kg
- polyethylene, high density, granulate: 375 kg; lognormal variance with pedigree 0.122, pedigree (1,1,5,5,1)
  properties: carbon content, fossil 0.857143, dry mass 1 kg, heating value, net 42.47 MJ, wet mass 1 kg
- propylene glycol, liquid: 35.9 kg; lognormal variance with pedigree 0.012, pedigree (1,1,5,5,1)
  properties: carbon content, fossil 0.473684, dry mass 1 kg, heating value, net 27.09 MJ, wet mass 1 kg
- reinforcing steel: 3970 kg; lognormal variance with pedigree 0.012, pedigree (1,1,5,5,1)
  properties: carbon content, fossil 0.004, dry mass 1 kg, wet mass 1 kg
- road vehicle factory: 8.73e-7 unit; lognormal variance with pedigree 0.302, pedigree (1,1,5,5,1)
- section bar rolling, steel: 2940 kg; lognormal variance with pedigree 0.042, pedigree (1,1,5,5,1)
- sheet rolling, steel: 682 kg; lognormal variance with pedigree 0.012, pedigree (1,1,5,5,1)
- sodium hydroxide, without water, in 50% solution state: 0.381 kg; lognormal variance with pedigree 0.012, pedigree (1,1,5,5,1)
  properties: dry mass 1 kg, heating value, net 3.03 MJ, wet mass 1 kg
- steel, chromium steel 18/8, hot rolled: 8.16 kg; lognormal variance with pedigree 0.122, pedigree (1,1,5,5,1)
  properties: carbon content, fossil 0.0008, dry mass 1 kg, wet mass 1 kg
- steel, low-alloyed, hot rolled: 19.9 kg; lognormal variance with pedigree 1.332, pedigree (1,1,5,5,1)
  properties: carbon content, fossil 0.005, dry mass 1 kg, wet mass 1 kg
- stone wool, packed: 16.3 kg; lognormal variance with pedigree 0.012, pedigree (1,1,5,5,1)
  properties: carbon content, fossil 0.015401, dry mass 1 kg, wet mass 1 kg
- sulfuric acid: 27.9 kg; lognormal variance with pedigree 0.012, pedigree (1,1,5,5,1)
  properties: dry mass 1 kg, wet mass 1 kg
- synthetic rubber: 612 kg; lognormal variance with pedigree 0.042, pedigree (1,1,5,5,1)
  properties: carbon content, fossil 0.871949, dry mass 1 kg, heating value, net 26.42 MJ, wet mass 1 kg
- tap water: 745.917, 262.233, 2009.45, 399.752, 2895.77, 6.72334, 10080.2 kg (7 suppliers, which the file names only by identifier); sum of these 16400 kg; lognormal variance with pedigree 0.012, pedigree (1,1,5,5,1)
  properties: carbon content, fossil 0.00178991, dry mass 0.000337476 kg, water content 2962.17, wet mass 1 kg
- used lorry, 28 metric ton: -1 unit; lognormal variance with pedigree 0.304, pedigree (3,1,1,5,1)
  properties: carbon content, fossil 0.113682, carbon content, non-fossil 0.00122856, dry mass 10200 kg, wet mass 10200 kg
- wastewater from lorry production: -2.18 m3; lognormal variance with pedigree 0.012, pedigree (1,1,1,5,1)
  properties: dry mass 0.337476 kg, water content 2962.17, wet mass 1000 kg
- wastewater, average: -15.8436, -0.0564092 m3 (2 suppliers, which the file names only by identifier); sum of these -15.9 m3; lognormal variance with pedigree 0.012, pedigree (1,1,1,5,1)
  properties: carbon content, non-fossil 0.194039, dry mass 0.346837 kg, water content 2882.2, wet mass 1000 kg
- wire drawing, copper: 49 kg; lognormal variance with pedigree 0.122, pedigree (1,1,5,5,1)

## Inputs from nature
- Water, well, in ground [natural resource, in water]: 69.5 m3; lognormal variance with pedigree 0.012, pedigree (1,1,5,5,1)

## Emissions to nature
- Ammonia [air, unspecified]: 0.0223 kg; lognormal variance with pedigree 0.122, pedigree (1,1,5,5,1)
- Benzene [air, unspecified]: 0.0131 kg; lognormal variance with pedigree 0.122, pedigree (1,1,5,5,1)
- Cadmium II [air, unspecified]: 1.73e-6 kg; lognormal variance with pedigree 0.652, pedigree (1,1,5,5,1)
- Carbon dioxide, fossil [air, unspecified]: 633 kg; lognormal variance with pedigree 0.122, pedigree (1,1,5,5,1)
- Carbon monoxide, fossil [air, unspecified]: 0.973 kg; lognormal variance with pedigree 0.122, pedigree (1,1,5,5,1)
- Chromium III [air, unspecified]: 0.000293 kg; lognormal variance with pedigree 0.652, pedigree (1,1,5,5,1)
- Copper ion [air, unspecified]: 0.000293 kg; lognormal variance with pedigree 0.652, pedigree (1,1,5,5,1)
- Dinitrogen monoxide [air, unspecified]: 0.0223 kg; lognormal variance with pedigree 0.122, pedigree (1,1,5,5,1)
- Lead II [air, unspecified]: 1.9e-8 kg; lognormal variance with pedigree 0.652, pedigree (1,1,5,5,1)
- Mercury II [air, unspecified]: 3.45e-9 kg; lognormal variance with pedigree 0.652, pedigree (1,1,5,5,1)
- Methane, fossil [air, unspecified]: 0.0165 kg; lognormal variance with pedigree 0.122, pedigree (1,1,5,5,1)
- NMVOC, non-methane volatile organic compounds [air, unspecified]: 7.87 kg; lognormal variance with pedigree 0.122, pedigree (1,1,5,5,1)
- Nickel II [air, unspecified]: 1.21e-5 kg; lognormal variance with pedigree 0.652, pedigree (1,1,5,5,1)
- Nitrogen oxides [air, unspecified]: 6 kg; lognormal variance with pedigree 0.122, pedigree (1,1,5,5,1)
- Particulate Matter, < 2.5 um [air, unspecified]: 0.254 kg; lognormal variance with pedigree 0.122, pedigree (1,1,5,5,1)
- Particulate Matter, > 10 um [air, unspecified]: 0.0109 kg; lognormal variance with pedigree 0.122, pedigree (1,1,5,5,1)
- Particulate Matter, > 2.5 um and < 10um [air, unspecified]: 0.0212 kg; lognormal variance with pedigree 0.122, pedigree (1,1,5,5,1)
- Selenium IV [air, unspecified]: 1.73e-6 kg; lognormal variance with pedigree 0.652, pedigree (1,1,5,5,1)
- Sulfur dioxide [air, unspecified]: 0.12 kg; lognormal variance with pedigree 0.122, pedigree (1,1,5,5,1)
- Toluene [air, unspecified]: 0.00551 kg; lognormal variance with pedigree 0.122, pedigree (1,1,5,5,1)
- Water [air, unspecified]: 12.885 m3; lognormal variance with pedigree 0.092025, pedigree (4,4,5,2,4)
- Xylene [air, unspecified]: 0.00551 kg; lognormal variance with pedigree 0.122, pedigree (1,1,5,5,1)
- Zinc II [air, unspecified]: 0.000173 kg; lognormal variance with pedigree 0.652, pedigree (1,1,5,5,1)
- BOD5, Biological Oxygen Demand [water, unspecified]: 0.126 kg; lognormal variance with pedigree 0.122, pedigree (1,1,5,5,1)
- COD, Chemical Oxygen Demand [water, unspecified]: 0.126 kg; lognormal variance with pedigree 0.122, pedigree (1,1,5,5,1)
- DOC, Dissolved Organic Carbon [water, unspecified]: 0.0551 kg; lognormal variance with pedigree 0.122, pedigree (1,1,5,5,1)
- TOC, Total Organic Carbon [water, unspecified]: 0.0551 kg; lognormal variance with pedigree 0.122, pedigree (1,1,5,5,1)
- Water [water, unspecified]: 54.935 m3; lognormal variance with pedigree 0.092025, pedigree (4,4,5,2,4)

## Sampling procedure
Manufacturing data is taken from an environmental report of one production site. Additional data was generated via oral communcation.

## Extrapolations
Data from one production site in Germany is used as an first estimate for Europe This dataset has been copied from an original dataset covering the geography RER. The uncertainty has been adjusted accordingly.

## Review by Niels Jungbluth 2006-09-27
passed.

## Review by Carl Vadenbo 2012-06-28
In preparation for the release of ecoinvent v3.0, the output of 'used lorry, 28 metric ton' was removed from the various 'transport, lorry, 28t' datasets and added to 'lorry, 28t, RER' in ecoinvent v2.2 and renamed and extrapolated to 'lorry production, 28 metric ton, GLO 2002'. The added exchange of by-product/waste was reviewed and the new dataset was accepted for inclusion into the ecoinvent database on 2012.07.05. The uncertainty information has only been adjusted for geographical representativeness in GLO, and consequently needs to be revised before subsequent releases of the database.
