# transport, tram

Dataset: EcoSpold 2, unit process
Geography: RoW
Time period: 2000-01-01 to 2022-12-31
Technology level: current
Classification: ISIC rev.4 ecoinvent: 4921:Urban and suburban passenger land transport
Classification: EcoSpold01Categories: transport systems/road
Scenario: Business-as-Usual
System model: Substitution, consequential, long-term
Generated by: Michael Spielmann (obsolete)
Published in: Spielmann M. 2004
Database: ecoinvent
isCopyrightProtected: true
accessRestrictedTo: 1

## General comment
Based on "transport, tram, CH 2000". Inventory refers to the entire transport life cycle. For the attribution of vehicle share to the transport performance a vehicle life time performance of 59'100’000 pkm/vehicle have been assumed. This dataset includes as well the energy use and combustion emission of a tram in Switzerland.

## Included activities start
The energy use and combustion emissions service starts with electricity consumption.

## Included activities end
operation of vehicle; production and maintenance of vehicles; construction of road. The energy use and combustion emissions service ends with the service of transporting 1 vehicle over 1 kilometre. The dataset includes electricity consumption, particulate emissions and until and including heavy metal emission (iron).

## Geography
Extrapolated from "transport, tram, CH 2000". The data for vehicle operation and infrastructure reflect Swiss conditions. Data for vehicle manufacturing and maintenance represents generic European data. Data for the vehicle disposal reflect Swiss situation. The data of the energy use and combustion emissions refers to average regional transport conditions in Switzerland.

## Technology
For vehicle operation all technologies are included in the average data. For the energy use and combustion emissions, tram transport abrasions tyre and brake emissions are taking into account.

## Reference product
- transport, tram: 1 person*km; By-product classification allocatable product; CPC 64112: Urban and suburban scheduled road transport services of passengers
  production volume 3.96633 person*km
  properties: carbon allocation 0 kg, carbon content 0, price 0.0151342 EUR2005

## Inputs from technosphere
- electricity, medium voltage: 0.00768304, 0.00142272, 0.000287462, 0.0036523, 0.0077313, 0.0633902, 0.00532272, 0.000285295 kWh (8 suppliers, which the file names only by identifier); sum of these 0.089775 kWh; lognormal variance with pedigree 0.2106, pedigree (5,5,5,5,5)
- maintenance, tram: 1.69e-8 unit; lognormal variance with pedigree 0.004, pedigree (3,1,5,5,1)
- tram: 1.69e-8 unit; lognormal variance with pedigree 0.004, pedigree (3,1,5,5,1)
- tram track: 0.00012 m*year; lognormal variance with pedigree 0.004, pedigree (3,1,5,5,1)

## Emissions to nature
- Particulate Matter, > 10 um [air, urban air close to ground]: 8.6184e-6 kg; lognormal variance with pedigree 0.122, pedigree (1,1,5,5,1)
- Particulate Matter, > 2.5 um and < 10um [air, urban air close to ground]: 1.53657e-5 kg; lognormal variance with pedigree 0.122, pedigree (1,1,5,5,1)
- Iron ion [soil, industrial]: 1.27386e-5 kg; lognormal variance with pedigree 0.122, pedigree (1,1,5,5,1)

## Sampling procedure
National statistics, literature studies

## Extrapolations
see Technology and Geography This dataset has been copied from an original dataset covering the geography CH. The uncertainty has been adjusted accordingly.

## Review by Niels Jungbluth 2004-04-02
Passed.

## Review by Carl Vadenbo 2012-06-29
In preparation for the release of ecoinvent v3.0, the datasets 'operation, tram CH' and 'transport, tram CH' in ecoinvent v2.2 were merged into the dataset 'transport, tram, GLO, 2000-2000'. The amounts and the uncertainty information of the exchanges were reviewed and were found to correspond to the disaggregated datasets, and the new dataset was accepted for inclusion into the ecoinvent database on 2012.07.04.
