# methane sulfonic acid production

Dataset: EcoSpold 2, unit process
Geography: RoW
Time period: 2010-01-01 to 2022-12-31
Technology level: current
Classification: ISIC rev.4 ecoinvent: 2011:Manufacture of basic chemicals
Synonyms: CH4SO3
Scenario: Business-as-Usual
System model: Substitution, consequential, long-term
Share of production covered: 100 %
Generated by: Jürgen Sutter
Database: ecoinvent
isCopyrightProtected: true
accessRestrictedTo: 1

## General comment
The process “methane sulfonic acid, at plant, GLO" is modelled for the production of methane sulfonic acid from methane. Raw materials are modelled with a stoechiometric calculation. Emissions are estimated. Energy consumptions, infrastructure and transports are calculated with standard values.
Methanesulfonic acid (CH3SO3H; CAS 75-75-2) is a colourless liquid. It is the simplest of the alkylsulfonic acids. Methanesulfonic acid is produced by sulfoxidation of methane.
SO3 + CH4 → CH4SO3
Methanesulfonic acid can be used in the generation of BH3. By reacting methanesulfonic acid with NaBH4 in an aprotic solvent such as THF or DMS, the complex of BH3 and the solvent is formed.
Frischknecht R., Jungbluth N., Althaus H.-J., Doka G., Dones R., Heck T., Hellweg S., Hischier R., Nemecek T., Rebitzer G. and Spielmann M. (2007) Overview and Methodology. Final report ecoinvent v2.0 No. 1. Swiss Centre for Life Cycle Inventories, Dübendorf, CH, retrieved from: www.ecoinvent.org.
Gendorf (2000) Umwelterklärung 2000, Werk Gendorf. Werk Gendorf, Burgkirchen as pdf-File under: http://www.gendorf.de/pdf/umwelterklaerung2000.pdf
Kurt Kosswig: Sulfonic Acids, Aliphatic. Published online: 2000. In: Ullmann's Encyclopedia of Industrial Chemistry, Seventh Edition, 2004 Electronic Release (ed. Fiedler E., Grossmann G., Kersebohm D., Weiss G. and Witte C.). 7 th Electronic Release Edition. Wiley InterScience, New York, Online-Version under: DOI: 10.1002/14356007.a25_503

## Included activities end
production of methane sulfonic acid including materials, energy uses, infrastructure, and emissions

## Geography
The inventory is modelled for the world.

## Technology
sulfonation of methane

## Time period
Time of publications

## Parameters
- fraction, cooling water, cooling pond system, to air: 0.032 dimensionless; name fraction_CW_CP_to_air; lognormal variance with pedigree 0.0413, pedigree (2,3,1,3,1)
  Calculated based on literature value (Scown, C.D., 2011, Water Footprint of U.S. Transportation Fuels and supplying information of the article) (Vionnet, S., Quantis Water Database - Technical Report, 2012).
- fraction, cooling water, once-through system, to air: 0.004 dimensionless; name fraction_CW_OT_to_air; lognormal variance with pedigree 0.0413, pedigree (2,3,1,3,1)
  (same comment as for fraction, cooling water, cooling pond system, to air)
- fraction, cooling water, recirculating system, to air: 0.771 dimensionless; name fraction_CW_R_to_air; lognormal variance with pedigree 0.0413, pedigree (2,3,1,3,1)
  (same comment as for fraction, cooling water, cooling pond system, to air)
- fraction, cooling water, to air: 0.3875 dimensionless; name fraction_CW_to_air; = (0.5*fraction_CW_OT_to_air)+(0.5*fraction_CW_R_to_air); lognormal variance with pedigree 0.092025, pedigree (4,4,3,2,4)
  Calculated value based on literature value (see comments of the other parametres present in this dataset) and expert opinion. In the case when no industry/literature data are available about the type of cooling or directly fraction, cooling water, to air specific for the process a default assumption is applied. It is assumed that the once-through cooling system is used in 50% of all cases and recirculating system is used in another 50% of all cases.

## Reference product
- methane sulfonic acid: 1 kg; By-product classification allocatable product; CPC 34160: Organo-sulphur compounds and other organo-inorganic compounds; heterocyclic compounds n.e.c.; nucleic acids an[…]
  production volume 6.7e6 kg
  properties: carbon allocation 0.124975 kg, carbon content 0.124975, carbon content, fossil 0.124975, carbon content, non-fossil 0, dry mass 1 kg, heating value, net 8.83 MJ, price 0.570979 EUR2005, water content 0, water in wet mass 0 kg, wet mass 1 kg

## Inputs from technosphere
- chemical factory, organics: 4e-10 unit; lognormal variance with pedigree 0.3184, pedigree (4,5,5,5,5)
- electricity, medium voltage: 0.0317343, 0.00118734, 0.0150856, 0.261829, 0.0219852, 0.00117839 kWh (6 suppliers, which the file names only by identifier); sum of these 0.333 kWh; lognormal variance with pedigree 0.1786, pedigree (4,5,5,5,5)
- heat, from steam, in chemical industry: 2 MJ; lognormal variance with pedigree 0.1786, pedigree (4,5,5,5,5)
  properties: heating value, net 1 MJ
- natural gas, high pressure: 0.000336797, 6.97035e-5, 6.46145e-5, 1.81969e-5, 0.00013987, 4.01874e-5, 2.55991e-5, 2.79893e-5, 1.69632e-5, 2.00475e-5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 m3 (24 suppliers, which the file names only by identifier); sum of these 0.0048772 m3; lognormal variance with pedigree 0.0255, pedigree (4,5,4,1,1)
  properties: carbon content, fossil 0.602381, dry mass 0.84 kg, heating value, net 36 MJ, wet mass 0.84 kg
- sulfur trioxide: 0.87719 kg; lognormal variance with pedigree 0.0255, pedigree (4,5,4,1,1)
  properties: dry mass 1 kg, wet mass 1 kg

## Inputs from nature
- Water, cooling, unspecified natural origin [natural resource, in water]: 0.024 m3; lognormal variance with pedigree 0.0255, pedigree (4,5,4,1,1)

## Emissions to nature
- Carbon dioxide, fossil [air, urban air close to ground]: 0.023158 kg; lognormal variance with pedigree 0.1786, pedigree (4,5,5,5,5)
- Methane, fossil [air, urban air close to ground]: 0.00035088 kg; lognormal variance with pedigree 0.1786, pedigree (4,5,5,5,5)
- Sulfur trioxide [air, urban air close to ground]: 0.0017544 kg; lognormal variance with pedigree 0.1786, pedigree (4,5,5,5,5)
- Water [air, unspecified]: 0.0093 m3; lognormal variance with pedigree 0.092025, pedigree (4,4,5,2,4)
- Sulfate [water, surface water]: 0.050526 kg; lognormal variance with pedigree 0.1786, pedigree (4,5,5,5,5)
- Water [water, unspecified]: 0.0147 m3; lognormal variance with pedigree 0.092025, pedigree (4,4,5,2,4)

## Sampling procedure
Literature data

## Extrapolations
Emissions are modelled with standard methods.
