# energy and auxilliary inputs, metal working machine, with process heat from light fuel oil

Dataset: EcoSpold 2, unit process
Geography: RoW
Time period: 2006-01-01 to 2022-12-31
Technology level: current
Classification: EcoSpold01Categories: metals/general manufacturing
Classification: ISIC rev.4 ecoinvent: 259:Manufacture of other fabricated metal products; metalworking service activit
Tags: ConvertedDataset
Scenario: Business-as-Usual
System model: Substitution, consequential, long-term
Share of production covered: 0 %
Generated by: Roland Steiner
Published in: Steiner, R. 2007
Database: ecoinvent
isCopyrightProtected: true
accessRestrictedTo: 1

## General comment
1 kg of this process is needed to produce 1 kg of final product. The data is an estimation based on the average consumption of factories separated into process specific (included here) and ancillary processes (included in metal working factory operation).
[This dataset was already contained in the ecoinvent database version 2. It was not individually updated during the transfer to ecoinvent version 3. Life Cycle Impact Assessment results may still have changed, as they are affected by changes in the supply chain, i.e. in other datasets. This dataset was generated following the ecoinvent quality guidelines for version 2. It may have been subject to central changes described in the ecoinvent version 3 change report (http://www.ecoinvent.org/database/ecoinvent-version-3/reports-of-changes/), and the results of the central updates were reviewed extensively. The changes added e.g. consistent water flows and other information throughout the database. The documentation of this dataset can be found in the ecoinvent reports of version 2, which are still available via the ecoinvent website. The change report linked above covers all central changes that were made during the conversion process.]

## Included activities end
This dataset includes the materials, energies and emissions related to the machines used for machining metal products. This is mainly electricity, compressed air and solvents. Process heat is from light fuel oil.

## Geography
Average data from several local to global sized companies. The main focus is on Germany and Europe.

## Technology
The companies are expected to cover the whole range of metal working.

## Reference product
- energy and auxilliary inputs, metal working machine: 1 kg; By-product classification allocatable product; CPC 4421: Machine-tools for working metal; machine-tools for working any material by laser or similar process
  production volume 3.01104e11 kg
  properties: carbon allocation 0 kg, carbon content 0, price 0.181772 EUR2005

## Inputs from technosphere
- compressed air, 700 kPa gauge: 0.291 m3; lognormal variance with pedigree 0.0208, pedigree (1,3,5,5,3)
- electricity, low voltage: 0.0493821, 0.00367154, 0.0146056, 0.105299, 0.0980318, 0.87901 kWh (6 suppliers, which the file names only by identifier); sum of these 1.15 kWh; lognormal variance with pedigree 0.0208, pedigree (1,3,5,5,3)
- heat, district or industrial, other than natural gas: 4.4365 MJ; lognormal variance with pedigree 0.0208, pedigree (1,3,5,5,3)
  properties: heating value, net 1 MJ
- lubricating oil: 0.000867 kg; lognormal variance with pedigree 0.0208, pedigree (1,3,5,5,3)
  properties: carbon content, fossil 0.75, dry mass 1 kg, heating value, net 40.2 MJ, wet mass 1 kg
- solvent, organic: 0.0014 kg; lognormal variance with pedigree 0.0208, pedigree (1,3,5,5,3)
  properties: carbon content, fossil 0.63072, dry mass 1 kg, heating value, net 19.11 MJ, wet mass 1 kg
- waste mineral oil: -0.000867 kg; lognormal variance with pedigree 0.0388, pedigree (4,3,2,5,3)
  properties: carbon content, fossil 0.864444, dry mass 0.9 kg, heating value, net 34.7 MJ, water content 0.111111, wet mass 1 kg

## Emissions to nature
- Hydrocarbons, aliphatic, alkanes, unspecified [air, urban air close to ground]: 0.000558 kg; lognormal variance with pedigree 0.0608, pedigree (1,3,5,5,3)
- Tetrachloroethylene [air, urban air close to ground]: 7.51e-5 kg; lognormal variance with pedigree 0.0608, pedigree (1,3,5,5,3)
- Water [air, urban air close to ground]: 0.00112 m3; lognormal variance with pedigree 0.0608, pedigree (1,3,5,5,3)

## Extrapolations
none This dataset has been copied from an original dataset covering the geography RER. The uncertainty has been adjusted accordingly.

## Review by Sébastien Humbert 2007-09-05
passed
none
