# electricity production, hydro, reservoir, non-alpine region

Dataset: EcoSpold 2, unit process
Geography: CA-NF
Time period: 1945-01-01 to 2022-12-31
Technology level: modern
Classification: ISIC rev.4 ecoinvent: 3510:Electric power generation, transmission and distribution
Tags: Canada; hydro power
Scenario: Business-as-Usual
System model: Substitution, consequential, long-term
Generated by: Karin Treyer
Published in: Bolliger, R. 2007
Database: ecoinvent
isCopyrightProtected: true
accessRestrictedTo: 1

## General comment
This is a child from the global dataset. Only annual production volume and DQI have been modified.
This dataset represents the production of high voltage electricity at grid-connected reservoir hydropower plants in Canada - Newfoundland and Labrador in 2012. Here, the reservoir hydropower plants are modelled with non-alpine region plants extrapolated from data on Swiss hydropower plants. A representative sample of various types of dams in Switzerland is taken into account, i.e. 52 reservoir power plants with a height of mor than 30 metres, an annual gross production output of 17.8 TWh and an installed capacity of 9130 MW. As far as the construction is concerned, reservoir power plants and pumped storage power plants are dealt with together due to the fact that the construction efforts are related. Lifetime is assumed to be 150 years for the dam and 80 years for the rest of materials. The data refers to plant construction of a mix of types of dams built between 1945 and 1970; therefore they might not be representative for more modern construction, for an individual type and for small-scale and smallest-scale plants. Emissions are only taken into account in the form of methane.
This dataset represents the production of high voltage electricity at grid-connected reservoir hydropower plants in Canada - Newfoundland and Labrador in 2012. Here, the reservoir hydropower plants are modelled with non-alpine region plants extrapolated from data on Swiss hydropower plants. A representative sample of various types of dams in Switzerland is taken into account, i.e. 52 reservoir power plants with a height of mor than 30 metres, an annual gross production output of 17.8 TWh and an installed capacity of 9130 MW. As far as the construction is concerned, reservoir power plants and pumped storage power plants are dealt with together due to the fact that the construction efforts are related. Lifetime is assumed to be 150 years for the dam and 80 years for the rest of materials. The data refers to plant construction of a mix of types of dams built between 1945 and 1970; therefore they might not be representative for more modern construction, for an individual type and for small-scale and smallest-scale plants.
[This dataset is meant to replace the following datasets:]

## Included activities start
This dataset starts from the power plant ready to produce electricity, i.e. the reservoir filled with water.
From (potential) energy in water, entering the power plant.

## Included activities end
This activity ends with 1kWh of high voltage electricity produced at the power plant and arrived at the busbar.

This dataset includes
- the area/volume occupied for the barrage, power station, and the lake
- a preliminary estimation of emissions of methane
- operation and maintenance activities and materials of the power plants, such as lubricating oil or mass of water passing through the turbines.

This dataset doesn"t include
- land use for access roads to the reservoir
- emissions of carbon dioxide and dinitrogen oxide
- raw materials extraction, decommissioning and waste treatment as these activities are already included in the infrastructure datasets
- transformation of the electricity produced.

## Geography
Data were extrapolated from the average Swiss reservoir hydropower plant.

## Technology
Storage power plants have an appendant reservoir. The size of the reservoir can range from daily, monthly to annual storage reservoirs. According to the net head high-pressure, medium-pressure and low-pressure systems can be distinguished. High- and medium-pressure systems are constructed as dams. High-pressure storage power plants with a head of over 50 meters are very common in Switzerland. For this dataset concrete dams (arch dams and gravity dams) with a height of more then 30 meters are taken into account. Also pumped storage power plants are included because in most cases the data is only available for the overall generation system. The same counts for high- and medium-pressure and alpine run-of-river power plants which are also included in the storage power plant dataset. Due to the fact that the efforts for the plant construction are similar to storage power plants and that the estimated production is comparatively low, high- and medium-pressure run-of-river power plants are covered by the reservoir power station dataset.
The technology used in the dataset has an overall efficiency of 82%, more modern technologies show an overall efficiency of about 88%. The overall efficiency is composed of the efficiency of the works water channel, the turbine, the generator and the transformer and are listed below:
Efficiency of power plant current modern
Works water channel 0.95 0.95
Turbine 0.87 0.91
Generator 0.96 0.98
Transformer 0.98 0.99
Reservoir power plant total
without works water channel 0.82 0.88
with works water channel 0.78 0.84
Pumped storage power plant 0.70 0.74
The losses along the works water channel are primarily caused by friction and are calculated from the difference between gross and net head. Based on this calculation the efficiency of the works water channel amounts to 95%. The losses depend on the flow rate and have its maximum at full load. The smaller the cross section of adits and pressure pipelines, the higher the flow velocity and thus the friction losses. In older plants according to Bischof (1992) the efficiency of works water channels could be increased generally more than by replacing turbines and generators.
The efficiency losses in turbines depend on the turbine type (Kaplan, Francis, Pelton, etc.), the turbine output and on the ratio between turbined water amount and the rated water amount. In König (1997) examples for curve progressions of the relationship between these variables are shown. For current power plants an efficiency of 87% is assumed, more modern turbines show an efficiency of about 91%.
The efficiency of generators depends on the output, the rotation speed of the generator and the cooling system. Some relevant data can be found in König (1997). For today’s power plants an efficiency of approximately 96% is assumed, modern generators show an efficiency of about 98%. The efficiency of transformers amounts to 98%, respectively 99%.
References:
Bischof, R. (1992) Modernisierungspotential bei bestehenden Wasserkraftwerken. Vortrag beim Schweizerischen Technischen Verband, Sektion Graubünden, 21. Oktober 1992. Churwalden, Schweiz [unpublished].
König F., von (1985) Bau von Wasserkraftanlagen. C.F. Müller, Karlsruhe.

## Time period
The Annual Production Volume is valid for the year 2013.

## Parameters
- gross electricity production: 4.02e10 kWh; name gross_electricity; lognormal variance with pedigree 0.008725, pedigree (4,2,1,2,1)
  Calculated value from literature value from StatCan ("Electric power generation, by class of electricity producer, annual") and installed power per type of plant (97% reservoir, 3% run-of-river) in the province. It includes electricity utilities and industrial producers. Valid for 2013.
  Electric power generation, by class of electricity producer, annual (Megawatt hour) [http://www5.statcan.gc.ca/cansim/a34?lang=eng&id=1270007&searchTypeByValue=1&mode=tableSummary&p2=35]
  Electricity generated from fuels, by electric utility thermal plants, annual (Megawatt hour) [http://www5.statcan.gc.ca/cansim/a34?lang=eng&id=1270006&searchTypeByValue=1&mode=tableSummary&p2=35]
- lifetime: 150 year; lognormal variance with pedigree 0.0014, pedigree (2,2,1,3,1)
  Estimation based on experiences.
  nan
- losses from gross electricity production: 0.01 dimensionless; name losses_gross_net; lognormal variance with pedigree 0.003225, pedigree (3,3,1,2,1)
  Literature value. Generic value taken from the IEA Electricity information 2014, part I, p. I.7: "The difference between gross and net electricity production is generally observed to be about 7% for conventional thermal stations, 1% for hydro stations and 6% for nuclear."
  IEA/OECD. 2014. Electricity Information 2014. International Energy Agency (IEA), Paris Cedex (FR).
  nan

## Reference product
- electricity, high voltage: 1 kWh; By-product classification allocatable product; CPC 17100: Electrical energy
  production volume 5.80304e8 kWh
  properties: carbon allocation 0 kg, carbon content 0, price 0.0977 EUR2005

## Inputs from technosphere
- hydropower plant, reservoir, non-alpine regions: 4.0404e-13 unit; lognormal variance with pedigree 0.042, pedigree (1,1,3,5,1)
- lubricating oil: 7.56e-6 kg; lognormal variance with pedigree 0.0983, pedigree (4,2,5,5,3)
  properties: carbon content, fossil 0.75, dry mass 1 kg, heating value, net 40.2 MJ, wet mass 1 kg
- waste mineral oil: -7.56e-6 kg; lognormal variance with pedigree 0.092, pedigree (1,1,1,5,1)
  properties: carbon content, fossil 0.864444, dry mass 0.9 kg, heating value, net 34.7 MJ, water content 0.111111, wet mass 1 kg

## Inputs from nature
- Energy, potential (in hydropower reservoir), converted [natural resource, in water]: 3.79 MJ
- Occupation, lake, artificial [natural resource, land]: 0.0345 m2*year; lognormal variance with pedigree 0.072, pedigree (1,1,3,5,1)
- Transformation, from unspecified [natural resource, land]: 0.00023 m2; lognormal variance with pedigree 0.302, pedigree (1,1,3,5,1)
- Transformation, to industrial area [natural resource, land]: 2.3e-6 m2; lognormal variance with pedigree 0.158, pedigree (4,1,3,5,3)
- Transformation, to lake, artificial [natural resource, land]: 0.0002277 m2; lognormal variance with pedigree 0.302, pedigree (1,1,3,5,1)
- Volume occupied, reservoir [natural resource, in water]: 0.15 m3*year; lognormal variance with pedigree 0.342, pedigree (1,1,5,5,1)
- Water, turbine use, unspecified natural origin [natural resource, in water]: 8.1 m3; lognormal variance with pedigree 0.002, pedigree (1,1,3,5,1)

## Emissions to nature
- Carbon dioxide, from soil or biomass stock [air, non-urban air or from high stacks]: 0.039 kg; lognormal variance with pedigree 0.0992, pedigree (5,3,5,4,3)
- Methane, non-fossil [air, non-urban air or from high stacks]: 0.000204 kg; lognormal variance with pedigree 0.0992, pedigree (5,3,5,4,3)
- Water [air, unspecified]: 0.0292217 m3; lognormal variance with pedigree 0.0407, pedigree (2,2,3,1,1)
- Water [water, unspecified]: 8.07078 m3; lognormal variance with pedigree 0.092025, pedigree (4,4,5,2,4)

## Sampling procedure
Sampling procedure based on literature. Some information regarding the results is given without source notes or detailed, comprehensible derivation due to the guaranteed confidential treatment of data.

## Extrapolations
This is a child from the global dataset. Only annual production volume and DQI have been modified.
This dataset has been extrapolated from an original dataset covering the geography CH (Switzerland). The uncertainty has been adjusted accordingly.

## Review by Carl Vadenbo 2015-05-28
The update of the whole electricity sector for the ecoinvent v3.2 database consist of hundreds of datasets. All these datasets have passed through a streamlined review processes where the underlying modelling of production volumes, technology shares and efficiencies was reviewed in detail prior to the datasets being submitted to the database.
