# battery production, Li-ion, NMC111, rechargeable, prismatic

Dataset: EcoSpold 2, unit process
Geography: RoW
Time period: 2017-01-01 to 2022-12-31
Technology level: current
Classification: ISIC rev.4 ecoinvent: 2720:Manufacture of batteries and accumulators
Synonyms: nickel-manganese-cobalt111 battery, Li-ion; nickel-manganese-cobalt battery; nickel-manganese-cobalt Li-ion battery
Scenario: Business-as-Usual
System model: Substitution, consequential, long-term
Generated by: Eleonora Crenna
Published in: Dai, Q. 2019
Database: ecoinvent
isCopyrightProtected: true
accessRestrictedTo: 1

## General comment
This dataset represents the production of 1 kg of Li-ion battery pack used e.g. for mechanical drive of an electric vehicle. The inventory is modelled according to the publication of Dai et al. (2019), in which a battery pack with gross pack energy of 23.5 kWh made of 140 3.6 V- 46Ah prismatic cells is presented. Cells are made of nicke-manganese-cobalt (NMC111) cathode and a graphite-based anode, liquid electrolyte and a porous plastic separator. Infrastructure is included as well in this dataset as "electronic component factory". This dataset is a copy of the corresponding regional dataset. Production volume was adjusted.
Reference:
Dai, Q., Kelly, J. C., Gaines, L., & Wang, M. (2019). Life cycle analysis of lithium-ion batteries for automotive applications. Batteries, 5(2), 48.

## Included activities start
The activity starts with the battery cells, module packaging and the materials for additional components (esternal case, tabs, etc.) entering the factory gate.

## Included activities end
The activity ends with the production of Li-ion battery pack.

## Geography
This dataset is considered representative of the global situation. It is based on data from the geography China, which is the leader country of Li-ion battery production.

## Technology
The battery pack includes module packaging, cells with NMC111 cathode and graphite-based anode and additional components (external case, tabs, electronic components).

## Time period
The time period is from 2017 (year of the collection of data) and 2020 (year of the dataset)

## Reference product
- battery, Li-ion, NMC111, rechargeable, prismatic: 1 kg; By-product classification allocatable product; CPC 46410: Primary cells and primary batteries
  production volume 2.24616e8 kg
  properties: carbon allocation 0.0600093 kg, carbon content 0.061328, carbon content, fossil 0.0600145, carbon content, non-fossil 0.00131352, copper content 0.00054835, dry mass 0.978497 kg, price 16.02 EUR2005, water content 0.0219753, water in wet mass 0.0215027 kg, wet mass 1 kg

## Inputs from technosphere
- aluminium, wrought alloy: 0.13653 kg; lognormal variance with pedigree 0.0038, pedigree (2,3,2,5,1)
  properties: dry mass 1 kg, wet mass 1 kg
- battery cell, Li-ion, NMC111: 0.72591 kg; lognormal variance with pedigree 0.0038, pedigree (2,3,2,5,1)
  properties: carbon content, fossil 0.0555763, carbon content, non-fossil 0.00176328, copper content 0.0333995, dry mass 1 kg, wet mass 1 kg
- battery management system, for Li-ion battery: 0.02424 kg; lognormal variance with pedigree 0.0038, pedigree (2,3,2,5,1)
  properties: carbon content, fossil 0.257652, carbon content, non-fossil 0.000574587, copper content 0.081, dry mass 1 kg, wet mass 1 kg
- battery module packaging, Li-ion: 0.0549 kg; lognormal variance with pedigree 0.0038, pedigree (2,3,2,5,1)
  properties: dry mass 1 kg, wet mass 1 kg
- copper, anode: 0.00055 kg; lognormal variance with pedigree 0.0038, pedigree (2,3,2,5,1)
  properties: copper content 0.997, dry mass 1 kg, wet mass 1 kg
- electricity, medium voltage: 4.55479e-6, 8.65555e-6, 5.17236e-6, 1.04155e-7, 4.96403e-7, 5.82875e-7, 1.51211e-7, 3.50256e-5, 1.172e-6, 5.77514e-5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 kWh (46 suppliers, which the file names only by identifier); sum of these 0.00028 kWh; lognormal variance with pedigree 0.0038, pedigree (2,3,2,5,1)
- electronic component, passive, unspecified: 0.0043 kg; lognormal variance with pedigree 0.0038, pedigree (2,3,2,5,1)
  properties: carbon content, fossil 0.317311, carbon content, non-fossil 0.0045566, dry mass 1 kg, wet mass 1 kg
- ethylene glycol: 0.02151 kg; lognormal variance with pedigree 0.0038, pedigree (2,3,2,5,1)
  properties: carbon content, fossil 0.387097, dry mass 1 kg, heating value, net 23.44 MJ, wet mass 1 kg
- glass fibre reinforced plastic, polyamide, injection moulded: 0.00018 kg; lognormal variance with pedigree 0.0038, pedigree (2,3,2,5,1)
  properties: carbon content, fossil 0.446018, dry mass 1 kg, wet mass 1 kg
- impact extrusion of aluminium, 1 stroke: 0.135315 kg; lognormal variance with pedigree 0.0038, pedigree (2,3,2,5,1)
- injection moulding: 0.00419 kg; lognormal variance with pedigree 0.0038, pedigree (2,3,2,5,1)
- metal working factory: 1.41414e-9 unit; lognormal variance with pedigree 0.36, pedigree (4,4,5,5,3)
- polyethylene, high density, granulate: 0.00419 kg; lognormal variance with pedigree 0.0038, pedigree (2,3,2,5,1)
  properties: carbon content, fossil 0.857143, dry mass 1 kg, heating value, net 42.47 MJ, wet mass 1 kg
- reinforcing steel: 0.00618 kg; lognormal variance with pedigree 0.0038, pedigree (2,3,2,5,1)
  properties: carbon content, fossil 0.004, dry mass 1 kg, wet mass 1 kg
- sheet rolling, aluminium: 0.00121512 kg; lognormal variance with pedigree 0.0038, pedigree (2,3,2,5,1)
- sheet rolling, copper: 0.00055 kg; lognormal variance with pedigree 0.0038, pedigree (2,3,2,5,1)
- sheet rolling, steel: 0.00618 kg; lognormal variance with pedigree 0.0038, pedigree (2,3,2,5,1)
- tap water: 0.02151 kg; lognormal variance with pedigree 0.0038, pedigree (2,3,2,5,1)
  properties: carbon content, fossil 0.00178991, dry mass 0.000337476 kg, water content 2962.17, wet mass 1 kg

## Sampling procedure
From Literature. Data on battery composition have been entirely retrieved from Dai et al. 2019 (see published source field). The information on energy consumption for battery assembly come from Siret et al. (2018), which is the report on Product Environmental Footprint Category Rules for High Specific Energy Rechargeable Batteries for Mobile Applications.

## Extrapolations
The dataset is extrapolated from CN data; the uncertainty has been adjusted accordingly.
