# hard coal briquettes factory construction

Dataset: EcoSpold 2, unit process
Geography: RoW
Time period: 1990-01-01 to 2022-12-31
Technology level: current
Classification: EcoSpold01Categories: hard coal/production
Classification: ISIC rev.4 ecoinvent: 4290:Construction of other civil engineering projects
Tags: ConvertedDataset
Scenario: Business-as-Usual
System model: Substitution, consequential, long-term
Generated by: Christian Bauer
Published in: Röder, A. 2007
Database: ecoinvent
isCopyrightProtected: true
accessRestrictedTo: 1

## General comment
The material and energy input has been roughly estimated, assuming 5 % of the coke plant masses.
[This dataset was already contained in the ecoinvent database version 2. It was not individually updated during the transfer to ecoinvent version 3. Life Cycle Impact Assessment results may still have changed, as they are affected by changes in the supply chain, i.e. in other datasets. This dataset was generated following the ecoinvent quality guidelines for version 2. It may have been subject to central changes described in the ecoinvent version 3 change report (http://www.ecoinvent.org/database/ecoinvent-version-3/reports-of-changes/), and the results of the central updates were reviewed extensively. The changes added e.g. consistent water flows and other information throughout the database. The documentation of this dataset can be found in the ecoinvent reports of version 2, which are still available via the ecoinvent website. The change report linked above covers all central changes that were made during the conversion process.]

## Included activities end
Includes the most important construction materials for the plant and their disposal. Also included is the landuse of the plant and the energy needed for the construction.

## Geography
Not specified.

## Technology
No specific information available.

## Reference product
- hard coal briquettes factory: 1 unit; By-product classification allocatable product; CPC 53269: Other constructions for manufacturing
  production volume 2.67763 unit
  properties: carbon allocation 0 kg, carbon content 0, price 7.20494e6 EUR2005

## Inputs from technosphere
- concrete, normal strength: 216.024, 22.5095, 14.6412, 434.077, 102.504, 7728.01, 182.23 m3 (7 suppliers, which the file names only by identifier); sum of these 8700 m3; lognormal variance with pedigree 0.302, pedigree (1,1,5,5,1)
  properties: dry mass 2190 kg, water content 0.086758, wet mass 2380 kg
- diesel, burned in building machine: 3.75e7 MJ; lognormal variance with pedigree 0.302, pedigree (1,1,5,5,1)
  properties: heating value, net 1 MJ
- electricity, medium voltage: 247775, 9270.55, 117786, 2.04431e6, 171656, 9200.65 kWh (6 suppliers, which the file names only by identifier); sum of these 2.6e6 kWh; lognormal variance with pedigree 0.302, pedigree (1,1,5,5,1)
- heat, district or industrial, other than natural gas: 65367.6, 3.74346e7 MJ (2 suppliers, which the file names only by identifier); sum of these 3.75e7 MJ; lognormal variance with pedigree 0.302, pedigree (1,1,5,5,1)
  properties: heating value, net 1 MJ
- polyethylene, high density, granulate: 75000 kg; lognormal variance with pedigree 0.302, pedigree (1,1,5,5,1)
  properties: carbon content, fossil 0.857143, dry mass 1 kg, heating value, net 42.47 MJ, wet mass 1 kg
- reinforcing steel: 6.75e6 kg; lognormal variance with pedigree 0.302, pedigree (1,1,5,5,1)
  properties: carbon content, fossil 0.004, dry mass 1 kg, wet mass 1 kg
- steel, chromium steel 18/8, hot rolled: 67500 kg; lognormal variance with pedigree 0.302, pedigree (1,1,5,5,1)
  properties: carbon content, fossil 0.0008, dry mass 1 kg, wet mass 1 kg
- steel, low-alloyed, hot rolled: 675000 kg; lognormal variance with pedigree 0.302, pedigree (1,1,5,5,1)
  properties: carbon content, fossil 0.005, dry mass 1 kg, wet mass 1 kg
- stone wool: 375000 kg; lognormal variance with pedigree 0.302, pedigree (1,1,5,5,1)
  properties: carbon content, fossil 0.015401, dry mass 1 kg, wet mass 1 kg
- waste mineral wool: -375000 kg; lognormal variance with pedigree 0.302, pedigree (1,1,1,5,1)
  properties: dry mass 1 kg, wet mass 1 kg
- waste polyethylene/polypropylene product: -75000 kg; lognormal variance with pedigree 0.302, pedigree (1,1,1,5,1)
  properties: carbon content, fossil 0.748045, dry mass 0.847 kg, heating value, net 42.47 MJ, water content 0.180638, wet mass 1 kg
- waste reinforced concrete: -2e7 kg; lognormal variance with pedigree 0.302, pedigree (1,1,1,5,1)
  properties: dry mass 0.99418 kg, water content 0.00585407, wet mass 1 kg

## Inputs from nature
- Occupation, industrial area [natural resource, land]: 300000 m2*year; lognormal variance with pedigree 0.302, pedigree (1,1,5,5,1)
- Transformation, from unspecified [natural resource, land]: 10000 m2; lognormal variance with pedigree 0.302, pedigree (1,1,5,5,1)
- Transformation, to industrial area [natural resource, land]: 10000 m2; lognormal variance with pedigree 0.302, pedigree (1,1,5,5,1)

## Sampling procedure
literature

## Extrapolations
see Geography/Text This dataset has been copied from an original dataset covering the geography RER. The uncertainty has been adjusted accordingly.

## Review by Hans-Jörg Althaus 2003-07-04
passed
