# pulverised lignite production

Dataset: EcoSpold 2, unit process
Geography: RoW
Time period: 1988-01-01 to 2022-12-31
Technology level: current
Classification: ISIC rev.4 ecoinvent: 1920:Manufacture of refined petroleum products
Classification: EcoSpold01Categories: lignite/fuels
Tags: ConvertedDataset
Scenario: Business-as-Usual
System model: Substitution, consequential, long-term
Generated by: Christian Bauer
Published in: Röder, A. 2007
Database: ecoinvent
isCopyrightProtected: true
accessRestrictedTo: 1

## General comment
Low heating value is 21.7 MJ/kg. No details on the production process are available. Emission data from drying and milling available from references. The emitted trace elements are proportional to the trace elements in the lignite. Losses from the prozess (0.5 %) are accounted as lignite ashes. The energy requirements are from an onsite mine-mouth lignite power plant.
[This dataset was already contained in the ecoinvent database version 2. It was not individually updated during the transfer to ecoinvent version 3. Life Cycle Impact Assessment results may still have changed, as they are affected by changes in the supply chain, i.e. in other datasets. This dataset was generated following the ecoinvent quality guidelines for version 2. It may have been subject to central changes described in the ecoinvent version 3 change report (http://www.ecoinvent.org/database/ecoinvent-version-3/reports-of-changes/), and the results of the central updates were reviewed extensively. The changes added e.g. consistent water flows and other information throughout the database. The documentation of this dataset can be found in the ecoinvent reports of version 2, which are still available via the ecoinvent website. The change report linked above covers all central changes that were made during the conversion process.]

## Included activities end
The water content of the lignite is reduced in driers from initial 60 % to 20 %. Production of briquettes and lignite dust follows.

## Geography
German conditions.

## Technology
Details not available.

## Reference product
- pulverised lignite: 1 MJ; By-product classification allocatable product; CPC 11040: Brown coal briquettes and similar solid fuels manufactured from brown coal
  production volume 3.75794 MJ
  properties: carbon allocation 0.0270968 kg, carbon content 0.660674, carbon content, fossil 0.660674, carbon content, non-fossil 0, dry mass 0.0410138 kg, heating value, net 1 MJ, price 0.00232 EUR2005, water content 0.123596, water in wet mass 0.00506912 kg, wet mass 0.0460829 kg

## Inputs from technosphere
- electricity, high voltage: 1.20394e-5, 1.23721e-6, 6.17831e-6, 0.0204559, 7.50661e-6, 1.77733e-5, 0.000461131, 1.72617e-5, 4.92854e-6, 0.000185248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 kWh (46 suppliers, which the file names only by identifier); sum of these 0.0289 kWh; lognormal variance with pedigree 0.302, pedigree (1,1,5,5,1)
- lignite: 0.102414, 0.00858605 kg (2 suppliers, which the file names only by identifier); sum of these 0.111 kg; lognormal variance with pedigree 0.002, pedigree (1,1,5,5,1)
  properties: carbon content, fossil 0.655, dry mass 0.42 kg, heating value, net 8.8 MJ, water content 1.38095, wet mass 1 kg
- lignite ash: -4.34775e-8, -0.000599957 kg (2 suppliers, which the file names only by identifier); sum of these -0.0006 kg; lognormal variance with pedigree 0.012, pedigree (1,1,1,5,1)
  properties: dry mass 1 kg, heating value, net 21.7 MJ, wet mass 1 kg
- lignite dust factory: 7.69e-13 unit; lognormal variance with pedigree 0.042, pedigree (1,1,5,5,1)

## Emissions to nature
- Aluminium III [air, non-urban air or from high stacks]: 1e-8 kg; lognormal variance with pedigree 0.652, pedigree (1,1,5,5,1)
- Antimony ion [air, non-urban air or from high stacks]: 3.6e-11 kg; lognormal variance with pedigree 0.652, pedigree (1,1,5,5,1)
- Arsenic ion [air, non-urban air or from high stacks]: 1.1e-11 kg; lognormal variance with pedigree 0.042, pedigree (1,1,5,5,1)
- Barium II [air, non-urban air or from high stacks]: 2.2e-10 kg; lognormal variance with pedigree 0.652, pedigree (1,1,5,5,1)
- Beryllium II [air, non-urban air or from high stacks]: 8.9e-12 kg; lognormal variance with pedigree 0.652, pedigree (1,1,5,5,1)
- Boron [air, non-urban air or from high stacks]: 2.7e-9 kg; lognormal variance with pedigree 0.652, pedigree (1,1,5,5,1)
- Bromine [air, non-urban air or from high stacks]: 3.6e-11 kg; lognormal variance with pedigree 0.652, pedigree (1,1,5,5,1)
- Cadmium II [air, non-urban air or from high stacks]: 1.4e-12 kg; lognormal variance with pedigree 0.042, pedigree (1,1,5,5,1)
- Calcium [air, non-urban air or from high stacks]: 4.5e-8 kg; lognormal variance with pedigree 0.652, pedigree (1,1,5,5,1)
- Chromium III [air, non-urban air or from high stacks]: 3.1e-11 kg; lognormal variance with pedigree 0.652, pedigree (1,1,5,5,1)
- Cobalt II [air, non-urban air or from high stacks]: 3.3e-11 kg; lognormal variance with pedigree 0.652, pedigree (1,1,5,5,1)
- Copper ion [air, non-urban air or from high stacks]: 1.3e-11 kg; lognormal variance with pedigree 0.652, pedigree (1,1,5,5,1)
- Iodine [air, non-urban air or from high stacks]: 4.5e-12 kg; lognormal variance with pedigree 0.652, pedigree (1,1,5,5,1)
- Iron ion [air, non-urban air or from high stacks]: 1.2e-8 kg; lognormal variance with pedigree 0.652, pedigree (1,1,5,5,1)
- Lead II [air, non-urban air or from high stacks]: 1.1e-11 kg; lognormal variance with pedigree 0.042, pedigree (1,1,5,5,1)
- Magnesium [air, non-urban air or from high stacks]: 6.7e-9 kg; lognormal variance with pedigree 0.652, pedigree (1,1,5,5,1)
- Manganese II [air, non-urban air or from high stacks]: 4.5e-11 kg; lognormal variance with pedigree 0.652, pedigree (1,1,5,5,1)
- Mercury II [air, non-urban air or from high stacks]: 2.2e-13 kg; lognormal variance with pedigree 0.302, pedigree (1,1,5,5,1)
- Molybdenum VI [air, non-urban air or from high stacks]: 1.6e-11 kg; lognormal variance with pedigree 0.652, pedigree (1,1,5,5,1)
- Nickel II [air, non-urban air or from high stacks]: 3.3e-11 kg; lognormal variance with pedigree 0.652, pedigree (1,1,5,5,1)
- Particulate Matter, < 2.5 um [air, non-urban air or from high stacks]: 5.3e-6 kg; lognormal variance with pedigree 0.302, pedigree (1,1,5,5,1)
- Particulate Matter, > 10 um [air, non-urban air or from high stacks]: 1.5e-6 kg; lognormal variance with pedigree 0.302, pedigree (1,1,5,5,1)
- Particulate Matter, > 2.5 um and < 10um [air, non-urban air or from high stacks]: 3.2e-6 kg; lognormal variance with pedigree 0.302, pedigree (1,1,5,5,1)
- Phosphorus [air, non-urban air or from high stacks]: 8.9e-11 kg; lognormal variance with pedigree 0.652, pedigree (1,1,5,5,1)
- Potassium I [air, non-urban air or from high stacks]: 1.3e-9 kg; lognormal variance with pedigree 0.652, pedigree (1,1,5,5,1)
- Scandium [air, non-urban air or from high stacks]: 1.1e-12 kg; lognormal variance with pedigree 0.652, pedigree (1,1,5,5,1)
- Selenium IV [air, non-urban air or from high stacks]: 4.5e-12 kg; lognormal variance with pedigree 0.652, pedigree (1,1,5,5,1)
- Silicon [air, non-urban air or from high stacks]: 1.1e-7 kg; lognormal variance with pedigree 0.652, pedigree (1,1,5,5,1)
- Sodium [air, non-urban air or from high stacks]: 2e-9 kg; lognormal variance with pedigree 0.652, pedigree (1,1,5,5,1)
- Strontium [air, non-urban air or from high stacks]: 1.6e-10 kg; lognormal variance with pedigree 0.652, pedigree (1,1,5,5,1)
- Thallium I [air, non-urban air or from high stacks]: 4.5e-14 kg; lognormal variance with pedigree 0.652, pedigree (1,1,5,5,1)
- Thorium [air, non-urban air or from high stacks]: 3.6e-12 kg; lognormal variance with pedigree 0.652, pedigree (1,1,5,5,1)
- Tin ion [air, non-urban air or from high stacks]: 3.6e-12 kg; lognormal variance with pedigree 0.652, pedigree (1,1,5,5,1)
- Titanium ion [air, non-urban air or from high stacks]: 2.2e-10 kg; lognormal variance with pedigree 0.652, pedigree (1,1,5,5,1)
- Uranium [air, non-urban air or from high stacks]: 2.2e-12 kg; lognormal variance with pedigree 0.652, pedigree (1,1,5,5,1)
- Vanadium V [air, non-urban air or from high stacks]: 7.8e-11 kg; lognormal variance with pedigree 0.652, pedigree (1,1,5,5,1)
- Zinc II [air, non-urban air or from high stacks]: 6.2e-11 kg; lognormal variance with pedigree 0.652, pedigree (1,1,5,5,1)
- Zirconium [air, non-urban air or from high stacks]: 1.8e-10 kg; lognormal variance with pedigree 0.652, pedigree (1,1,5,5,1)

## Sampling procedure
literature

## Extrapolations
see Geography/Text This dataset has been copied from an original dataset covering the geography DE. The uncertainty has been adjusted accordingly.

## Review by Hans-Jörg Althaus 2003-07-04
passed
