# aluminium milling, large parts

Dataset: EcoSpold 2, unit process
Geography: RoW
Time period: 2006-01-01 to 2022-12-31
Technology level: current
Classification: ISIC rev.4 ecoinvent: 2592:Treatment and coating of metals; machining
Classification: EcoSpold01Categories: metals/chipping
Tags: ConvertedDataset
Scenario: Business-as-Usual
System model: Substitution, consequential, long-term
Share of production covered: 0 %
Generated by: Roland Steiner
Published in: Steiner, R. 2007
Database: ecoinvent
isCopyrightProtected: true
accessRestrictedTo: 1

## General comment
The reference for milling is 1 kg of metal removed. As there is a large variation from factory to factory with regard to the LCI, it is advised that in case this dataset becomes important in the results, it has to be investigated further if the rough estimations made are applicable or not. If you do not know how much has been removed by turning you can use 0.23kg of this process per kg of final product as an average assumption.
[This dataset was already contained in the ecoinvent database version 2. It was not individually updated during the transfer to ecoinvent version 3. Life Cycle Impact Assessment results may still have changed, as they are affected by changes in the supply chain, i.e. in other datasets. This dataset was generated following the ecoinvent quality guidelines for version 2. It may have been subject to central changes described in the ecoinvent version 3 change report (http://www.ecoinvent.org/database/ecoinvent-version-3/reports-of-changes/), and the results of the central updates were reviewed extensively. The changes added e.g. consistent water flows and other information throughout the database. The documentation of this dataset can be found in the ecoinvent reports of version 2, which are still available via the ecoinvent website. The change report linked above covers all central changes that were made during the conversion process.]

## Included activities end
This dataset encompasses the direct electricity consumption of the machine as well as compressed air and lubricant oil. Furthermore, the metal removed is included. Machine as well as factory infrastructure and operation are considered as well. The disposal of the lubricant oil is also included while the metal removed is assumed to be recycled. Degreasing is not included and has to be added if necessary

## Geography
Geographical coverage encompasses the industrialised countries.

## Technology
Average technology

## Parameters
- fraction, cooling water, cooling pond system, to air: 0.032 dimensionless; name fraction_CW_CP_to_air; lognormal variance with pedigree 0.0413, pedigree (2,3,1,3,1)
  Calculated based on literature value (Scown, C.D., 2011, Water Footprint of U.S. Transportation Fuels and supplying information of the article) (Vionnet, S., Quantis Water Database - Technical Report, 2012).
- fraction, cooling water, once-through system, to air: 0.004 dimensionless; name fraction_CW_OT_to_air; lognormal variance with pedigree 0.0413, pedigree (2,3,1,3,1)
  (same comment as for fraction, cooling water, cooling pond system, to air)
- fraction, cooling water, recirculating system, to air: 0.771 dimensionless; name fraction_CW_R_to_air; lognormal variance with pedigree 0.0413, pedigree (2,3,1,3,1)
  (same comment as for fraction, cooling water, cooling pond system, to air)
- fraction, cooling water, to air: 0.3875 dimensionless; name fraction_CW_to_air; = (0.5*fraction_CW_OT_to_air)+(0.5*fraction_CW_R_to_air); lognormal variance with pedigree 0.092025, pedigree (4,4,3,2,4)
  Calculated value based on literature value (see comments of the other parametres present in this dataset) and expert opinion. In the case when no industry/literature data are available about the type of cooling or directly fraction, cooling water, to air specific for the process a default assumption is applied. It is assumed that the once-through cooling system is used in 50% of all cases and recirculating system is used in another 50% of all cases.
- fraction, process water, to air: 0.3 dimensionless; lognormal variance with pedigree 0.092025, pedigree (4,4,3,2,4)

## Reference product
- aluminium removed by milling, large parts: 1 kg; By-product classification allocatable product; CPC 39363: Waste and scrap of aluminium
  production volume 2.67763 kg
  properties: carbon allocation 0 kg, carbon content 0, carbon content, fossil 0, carbon content, non-fossil 0, dry mass 1 kg, price 1.65574 EUR2005, water content 0, water in wet mass 0 kg, wet mass 1 kg

## Inputs from technosphere
- aluminium, cast alloy: 0.32 kg; lognormal variance with pedigree 0.002, pedigree (1,1,5,5,1)
  properties: dry mass 1 kg, wet mass 1 kg
- aluminium, wrought alloy: 0.68 kg; lognormal variance with pedigree 0.002, pedigree (1,1,5,5,1)
  properties: dry mass 1 kg, wet mass 1 kg
- compressed air, 700 kPa gauge: 1.28 m3; lognormal variance with pedigree 0.1008, pedigree (4,3,5,5,4)
- electricity, low voltage: 0.00678467, 0.000504437, 0.00200668, 0.0144671, 0.0134687, 0.120768 kWh (6 suppliers, which the file names only by identifier); sum of these 0.158 kWh; lognormal variance with pedigree 0.0208, pedigree (1,3,5,5,3)
- energy and auxilliary inputs, metal working factory: 4.41 kg; lognormal variance with pedigree 0.1008, pedigree (4,3,5,5,4)
- lubricating oil: 0.00382 kg; lognormal variance with pedigree 0.1008, pedigree (4,3,5,5,4)
  properties: carbon content, fossil 0.75, dry mass 1 kg, heating value, net 40.2 MJ, wet mass 1 kg
- metal working factory: 2.02e-9 unit; lognormal variance with pedigree 0.4008, pedigree (4,3,5,5,4)
- metal working machine, unspecified: 0.000174 kg; lognormal variance with pedigree 0.4008, pedigree (4,3,5,5,4)
- waste mineral oil: -0.00382 kg; lognormal variance with pedigree 0.1008, pedigree (4,3,2,5,4)
  properties: carbon content, fossil 0.864444, dry mass 0.9 kg, heating value, net 34.7 MJ, water content 0.111111, wet mass 1 kg

## Inputs from nature
- Water, cooling, unspecified natural origin [natural resource, in water]: 0.0147797 m3; lognormal variance with pedigree 0.0232, pedigree (2,3,5,5,3)
- Water, unspecified natural origin [natural resource, in water]: 0.00191267 m3; lognormal variance with pedigree 0.0148, pedigree (3,3,5,5,1)

## Emissions to nature
- Water [air, unspecified]: 0.00630094 m3; lognormal variance with pedigree 0.0427, pedigree (2,2,5,5,1)
- Water [water, unspecified]: 0.0103914 m3; lognormal variance with pedigree 0.0427, pedigree (2,2,5,5,1)

## Extrapolations
none This dataset has been copied from an original dataset covering the geography RER. The uncertainty has been adjusted accordingly.

## Review by Sébastien Humbert 2007-09-05
passed
none
