# dewatering of ethanol from biomass, from 95% to 99.7% solution state

Dataset: EcoSpold 2, unit process
Geography: US
Time period: 1990-01-01 to 2022-12-31
Technology level: current
Classification: EcoSpold01Categories: biomass/fuels
Classification: ISIC rev.4 ecoinvent: 2011:Manufacture of basic chemicals
Synonyms: cologne spirits (alcohol); bioethanol; Ethyl alcohol; algrain; fermentation alcohol; ethyl hydroxide; cologne spirit; alcohol dehydrated; Alkohol; Denatured alcohol; Ethanol; grain alcohol; ethyl hydrate; bio-ethanol; ethanol 200 proof; Anhydrol; Ethanol absolute
Tags: ConvertedDataset
Scenario: Business-as-Usual
System model: Substitution, consequential, long-term
Share of production covered: 0 %
Generated by: Edgard Gnansounou
Published in: Jungbluth N. 2007
Database: ecoinvent
isCopyrightProtected: true
accessRestrictedTo: 1

## General comment
Inventory refers to the production of 1 kg anhydrous ethanol 99.7% (dry basis, i.e. 1.003 kg anhydrous ethanol wet basis). Dehydration is carried out by molecular sieve technology. Ethanol is produced from corn, in the average US context.
[This dataset was already contained in the ecoinvent database version 2. It was not individually updated during the transfer to ecoinvent version 3. Life Cycle Impact Assessment results may still have changed, as they are affected by changes in the supply chain, i.e. in other datasets. This dataset was generated following the ecoinvent quality guidelines for version 2. It may have been subject to central changes described in the ecoinvent version 3 change report (http://www.ecoinvent.org/database/ecoinvent-version-3/reports-of-changes/), and the results of the central updates were reviewed extensively. The changes added e.g. consistent water flows and other information throughout the database. The documentation of this dataset can be found in the ecoinvent reports of version 2, which are still available via the ecoinvent website. The change report linked above covers all central changes that were made during the conversion process.]

## Included activities end
This dataset includes the dehydration of hydrated ethanol (95%) to anhydrous ethanol (99.7%). Hydrated ethanol input is corn-based ethanol, produced in the US context. Treatment of waste streams is included.

## Geography
Data is from the etha+ project (Alcosuisse, CH), adapted to US context

## Technology
Dehydration is done by molecular sieve technology.

## Time period
Data from 1990 to 2006, current dry-mill technology for the production of ethanol from corn

## Reference product
- ethanol, without water, in 99.7% solution state, from fermentation: 1 kg; By-product classification allocatable product; CPC 35491: Biodiesel
  production volume 1.28091e10 kg
  properties: carbon allocation 0.521739 kg, carbon content 0.521739, carbon content, fossil 0, carbon content, non-fossil 0.521739, dry mass 1 kg, heating value, net 28.1 MJ, price 0.436 EUR2005, water content 0, water in wet mass 0 kg, wet mass 1 kg

## Inputs from technosphere
- electricity, medium voltage: 0.0088389 kWh; lognormal variance with pedigree 0.0101, pedigree (1,2,5,1,1)
- ethanol fermentation plant: 5.2989e-11 unit; lognormal variance with pedigree 0.3101, pedigree (1,2,5,1,1)
- ethanol, without water, in 95% solution state, from fermentation: 1 kg
  properties: carbon content, non-fossil 0.521739, dry mass 1 kg, heating value, net 28.1 MJ, wet mass 1 kg
- heat, district or industrial, natural gas: 1.0046 MJ; lognormal variance with pedigree 0.0101, pedigree (1,2,5,1,1)
  properties: heating value, net 1 MJ
- wastewater, average: -4.9623e-5 m3; lognormal variance with pedigree 0.0101, pedigree (1,2,1,1,1)
  properties: carbon content, non-fossil 0.194039, dry mass 0.346837 kg, mass concentration, TOC 0.1091 kg/m3, mass concentration, calcium 0.039453 kg/m3, mass concentration, chlorine 0.030031 kg/m3, mass concentration, hydrogen 0.013365 kg/m3, mass concentration, nitrogen 0.031015 kg/m3, mass concentration, oxygen 0.069824 kg/m3, mass concentration, sodium 0.06456 kg/m3, mass concentration, sulfur 0.015602 kg/m3, water content 2882.2, wet mass 1000 kg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

## Sampling procedure
Data is from the etha+ project (Alcosuisse, CH), technology by French ethanol plant supplier, modelling by ENERS (CH)

## Review by Niels Jungbluth 2006-08-15
Passed.
none
