# drying of maize straw and whole-plant

Dataset: EcoSpold 2, unit process
Geography: CH
Time period: 1985-01-01 to 2022-12-31
Technology level: current
Classification: ISIC rev.4 ecoinvent: 0163:Post-harvest crop activities
Classification: EcoSpold01Categories: agricultural means of production/work processes
Tags: ConvertedDataset
Scenario: Business-as-Usual
System model: Substitution, consequential, long-term
Generated by: Silvio Blaser
Published in: Nemecek, T. 2007
Database: ecoinvent
isCopyrightProtected: true
accessRestrictedTo: 1

## General comment
This dataset represents the drying process of maize straw and whole plant. The functional unit is 1 kg evaporated water. This module should be used when evaluating drying of whole maize plant pellets.
[This dataset was already contained in the ecoinvent database version 2. It was not individually updated during the transfer to ecoinvent version 3. Life Cycle Impact Assessment results may still have changed, as they are affected by changes in the supply chain, i.e. in other datasets. This dataset was generated following the ecoinvent quality guidelines for version 2. It may have been subject to central changes described in the ecoinvent version 3 change report (http://www.ecoinvent.org/database/ecoinvent-version-3/reports-of-changes/), and the results of the central updates were reviewed extensively. The changes added e.g. consistent water flows and other information throughout the database. The documentation of this dataset can be found in the ecoinvent reports of version 2, which are still available via the ecoinvent website. The change report linked above covers all central changes that were made during the conversion process.]

## Included activities start
From reception of the raw material at the factory gate.

## Included activities end
This activity ends with the dried product. The dataset includes the energy demand, heat and electricity consumption, for evaporating 1 kg of water when drying maize plants (at 110-120°C). Also included in the dataset is the infrastructure (building and machinery). The dataset doesn't include production of the wet raw material, waste and air emissions (like dust) from this process neither utilisation of the dried product.

## Geography
The inventories are based on indications made by drying plants in Switzerland compared partially to values given in international references (Western Europe).

## Technology
The inventoried process for grass- and maize drying consists in the drying process itself, dosage, chopping the wet stuff, ventilation, milling, pressing of pellets, cooling, and the weighing and packing of the finished dry product (Scheidegger 2002). Drying time depends on the initial water content (a function of grain ripeness, grain moisture, air humidity and temperature). The inventories are based on common grass and maize drying plants. As the amount of water to be evaporated is significantly higher for grain maize than for other grains, it is recommended to use the activity 'drying of maize straw and whole-plant' in this case. Most of the 70 centralized grass- and maize-drying plants in Switzerland use rotary dryers (Christen 2002). The technology of rotary dryers is described in Stela (2002) as follows: The drying drum is supplied with the wet product by means of a suitable feed device. Transporting scoops on the feed side of the drum take up the product and carry it to the drum internals. The choice of drum internals is determined by the characteristics of the product. Drying is usually in concurrent flow with the wet product coming into contact with the hot drying gas, the temperature of which possesses a wide adjustment range, allowing the most suitable drying temperature to be set for each product. The residence time of the product in the dryer depends on drum speed, drum declination, the rate of flow of the drying gas and the damming device at the end of the drum.
As is commonly known, drying is a far quicker process when the drying air is heated. The drying plants are thus equipped with air heaters that raise the air temperature to different levels, depending on the product to be dried. It is important not to overheat any dried product, but bread- and seed grains in particular must not be heated to over 40 °C. This is because the individual grain must preserve its chemical and physical properties, especially its germination capacity and suitability for baking for subsequent use as seed and in food production. Cereals used as feedstuffs are more tolerant of high temperatures, so the grains may be dried in the drying plants at an air temperature 5 to 10 °C higher warmer than the air temperature permitted for bread grains (80-90 °C). This allows for a more efficient drying process and a lower fuel consumption per kg of water extracted.
Most grass- and maize-drying plants are equipped with direct air heating type of furnace (Christen 2002).The direct air heater consists of an outer casing, an inner sheath against radiation loss and a perforated combustion chamber of highly heat-resistant steel, placed centrally in the casing. The hot exhaust gases are mixed with the fresh air heated at the side of the combustion chamber, and warm air of a homogeneous temperature is generated. The combustion energy is consequently led directly into the dryer. This method is used primarily for drying feedstuffs and industrial raw materials (Stela 2002). Typical air heaters used in Swiss drying plants have a nominal power of 4 to 5 MW.
References
Scheidegger, F. Landi Landshut, Bätterkinden, Switzerland, November 2002 (personal communication).
Christen, J. (VSTB). Alberswil, Switzerland, July 2002 (personal communication).
Stela (2002) Tailor-made solutions. Website of Stela Laxhuber KG, Massing, Germany. Retrieved on April 2002 from http://www.stela.de/englisch/index.htm.

## Time period
Time of publication in literature and annual reports. Most publications between 2001 and 2002.

## Reference product
- drying of maize straw and whole-plant: 1 l; By-product classification allocatable product; CPC 86111: Post-harvest crop services
  production volume 8.282e7 l
  properties: carbon allocation 0 kg, carbon content 0, price 0.0393652 EUR2005

## Inputs from technosphere
- building, hall: 2.18e-5 m2; lognormal variance with pedigree 0.3021, pedigree (3,2,5,1,1)
- cast iron: 0.000705 kg; lognormal variance with pedigree 0.016, pedigree (4,5,5,1,1)
  properties: carbon content, fossil 0.04, dry mass 1 kg, wet mass 1 kg
- electricity, low voltage: 0.05 kWh; lognormal variance with pedigree 0.0186, pedigree (2,5,5,1,1)
- heat, district or industrial, other than natural gas: 2.85 MJ; lognormal variance with pedigree 0.0012, pedigree (2,3,5,1,1)
  properties: heating value, net 1 MJ

## Inputs from nature
- Occupation, construction site [natural resource, land]: 0.00265 m2*year; lognormal variance with pedigree 0.0421, pedigree (3,2,5,1,1)
- Occupation, industrial area [natural resource, land]: 0.0441 m2*year; lognormal variance with pedigree 0.0421, pedigree (3,2,5,1,1)
- Transformation, from pasture, man made [natural resource, land]: 1.76e-5 m2; lognormal variance with pedigree 0.1221, pedigree (3,2,5,1,1)
- Transformation, to industrial area [natural resource, land]: 1.76e-5 m2; lognormal variance with pedigree 0.1221, pedigree (3,2,5,1,1)

## Extrapolations
Values are based partially on non verified measurements, on expert estimations and on international references.

## Review by Roland Hischier 2003-06-03
Passed.

## Review by Emilia Moreno Ruiz 2012-05-30
dataset documented by trainee Diego Lima Medeiros
