# natural gas, high pressure, import from TR

Dataset: EcoSpold 2, unit process
Geography: GR
Time period: 2000-01-01 to 2022-12-31
Technology level: current
Classification: ISIC rev.4 ecoinvent: 3520:Manufacture of gas; distribution of gaseous fuels through mains
Scenario: Business-as-Usual
System model: Substitution, consequential, long-term
Generated by: Carl Vadenbo
Database: ecoinvent
isCopyrightProtected: true
accessRestrictedTo: 1

## General comment
This dataset represents the import of natural gas [m3] from Turkey to Greece. This import activity is only intended to connect the consumption mix of the supplying country to that of the receiving geography. Any losses, emissions, or energy, infrastructure and transport requirements are not considered in this activity. This import activity is establish as a proxy for the trade situation in 2019 as reported EuroStat (2022a,b). Sources: EuroStat (2022a) Imports of natural gas by partner country [NRG_TI_GAS], accessed on 2022-06-28; EuroStat (2022b) Supply, transformation and consumption of gas [NRG_CB_GAS], accessed on 2022-06-28. Both datasets are available from https://ec.europa.eu/eurostat/

## Included activities start
This activity starts with output of the market for natural gas, high pressure, in the supplying geography.

## Included activities end
This activity ends with the supply to the market for natural gas, high pressure, in the receiving geography. Neither losses, emissions, nor energy, infrastructure or transport requirements are considered in this proxy import activity.

## Geography
For gas import from Turkey to Greece.

## Reference product
- natural gas, high pressure: 1 m3; By-product classification allocatable product; CPC 12020: Natural gas, liquefied or in the gaseous state
  production volume 7.33e8 m3
  properties: amount in multioutput activity_m3 0 m3, carbon allocation 0.544635 kg, carbon content 0.741, carbon content, fossil 0.741, carbon content, non-fossil 0, dry mass 0.735 kg, heating value, gross 40 MJ, heating value, net 36 MJ, price 0.166 EUR2005, water content 0, water in wet mass 0 kg, wet mass 0.735 kg

## Inputs from technosphere
- natural gas, high pressure: 1 m3
  properties: carbon content, fossil 0.741, dry mass 0.735 kg, heating value, gross 40 MJ, heating value, net 36 MJ, wet mass 0.735 kg
