# aluminium production, primary, cast alloy slab from continuous casting

Dataset: EcoSpold 2, unit process
Geography: CA-QC
Time period: 2012-01-01 to 2022-12-31
Technology level: current
Classification: ISIC rev.4 ecoinvent: 2420:Manufacture of basic precious and other non-ferrous metals
Synonyms: aluminium cast alloy; aluminium busbar; Continuous casting
Tags: single enterprise data
Scenario: Business-as-Usual
System model: Substitution, consequential, long-term
Share of production covered: 100 %
Generated by: Marylène Dussault
Database: ecoinvent
isCopyrightProtected: true
accessRestrictedTo: 1

## General comment
This dataset represents the manufacturing of aluminium cast alloy by direct chilled horizontal continuous casting from primary liquid aluminium. This process can also be used for production of bus bar, anode beams and anode studs for aluminium smelters or substation. Hot liquid primary aluminium transported by truck using crucibles is used as the main aluminium bearing input (90-95%). The liquid aluminium is pre-treated in reverberatory furnace were pre-heated aluminium scrap, aluminum based alloy additives and pure metals are added to obtain desired alloy composition. Scrap aluminium is used as aluminium input up to 5%. Alloy composition represented in this dataset is mainly cast alloy product from the 1xx.x series (minimum 99% aluminium), but alloy composition that can reach up to 5% of final alloy. Molten aluminium alloy is degassed with argon and cast by direct chilled horizontal continuous casting. Final product is cut to the desired length. Duration of casting varies from 2 Tons per hour to 6 Tons per hour depending on end product desired. Wastewater from chilling is treated on site by diffused air filtration and is mainly recirculated in closed-loop. The operations covered by this dataset include: pre-treatment of hot metal, recovery and handling of internal process scrap, batching, alloying, metal treatment, casting operations, sawing and cooling activities, maintenance and repair of plant and equipment, treatment of process air, liquids and solids.

## Included activities start
Activity starts with the arrival of hot liquid aluminium input and other additives at reverbatory furnace.

## Included activities end
This activity ends with cooling of casted product by direct chilled horizontal casting. The dataset includes material and energy related to the alloy production and casting: scrap and primary metal input, preheating, melting in reverbatory furance, alloying, degassing, water use and casting). It also includes waste treatment and onsite wastewater treatment. Infrastructure is estimated using an available ecoinvent 3.0 dataset.

## Parameters
- electricity process and auxiliairies: 0.264 kWh; name kWh_process; lognormal variance with pedigree 0.0013, pedigree (2,2,1,1,1)
  Measured value. Electricity requirements for process and auxiliairies (heating, maintenance of furnace when no production, etc.).
- electricity wastewater treatment: 0.05 kWh; name kWh_ww; lognormal variance with pedigree 0.0013, pedigree (2,2,1,1,1)
  Measured value. Electricity input for insitu wastewater treatment. Based on total water used in process. Note that around 42% of total water used in the process is treated, cooled and reused in closed loop.

## Reference product
- aluminium, primary, cast alloy slab from continuous casting: 1 kg; By-product classification allocatable product; CPC 41431: Unwrought aluminium
  production volume 1.8e7 kg
  properties: carbon allocation 0 kg, carbon content 0, carbon content, fossil 0, carbon content, non-fossil 0, dry mass 1 kg, price 3.67 EUR2005, water content 0, water in wet mass 0 kg, wet mass 1 kg

## Inputs from technosphere
- aluminium casting facility: 1.54e-10 unit; lognormal variance with pedigree 0.083, pedigree (5,4,4,3,4)
- aluminium scrap, new: 0.05 kg; lognormal variance with pedigree 0.0013, pedigree (2,2,4,1,1)
  properties: dry mass 1 kg, wet mass 1 kg
- aluminium, primary, liquid: 0.938889 kg; lognormal variance with pedigree 0.0013, pedigree (2,2,4,1,1)
  properties: dry mass 1 kg, wet mass 1 kg
- blast furnace slag: -0.015 kg; lognormal variance with pedigree 0.0013, pedigree (2,2,1,1,1)
  properties: aluminium content 0.675, dry mass 1 kg, wet mass 1 kg
- blast furnace sludge: -1.30556e-7 kg; lognormal variance with pedigree 0.0013, pedigree (2,2,1,1,1)
  properties: carbon content, fossil 0.339168, dry mass 0.914 kg, water content 0.0940919, wet mass 1 kg
- boric oxide: 4.16667e-5 kg; lognormal variance with pedigree 0.0013, pedigree (2,2,4,1,1)
  properties: dry mass 1 kg, wet mass 1 kg
- diesel, burned in diesel-electric generating set, 10MW: 0.020205 MJ; lognormal variance with pedigree 0.0006, pedigree (1,1,4,1,1)
  properties: density 0.84 kg/l, fuel input in physical units, L 0.000562 l, heating value, net 1 MJ
- electricity, medium voltage: 0.314 kWh; lognormal variance with pedigree 0.0006, pedigree (1,1,4,1,1)
- hazardous waste, for underground deposit: -0.000399447 kg; lognormal variance with pedigree 0.0013, pedigree (2,2,1,1,1)
  properties: carbon content, fossil 0.554667, dry mass 1 kg, wet mass 1 kg
- heat, district or industrial, natural gas: 3.21701 MJ; lognormal variance with pedigree 0.0006, pedigree (1,1,4,1,1)
  properties: Corresponding fuel use 1.11 MJ, fuel input in m3 0.0777 m3, heating value, net 1 MJ
- inert waste: -0.000108672 kg; lognormal variance with pedigree 0.0013, pedigree (2,2,1,1,1)
  properties: dry mass 1 kg, wet mass 1 kg
- iron pellet: 0.00125 kg; lognormal variance with pedigree 0.0013, pedigree (2,2,4,1,1)
  properties: dry mass 1 kg, wet mass 1 kg
- iron scrap, unsorted: -5.83333e-7 kg; lognormal variance with pedigree 0.0013, pedigree (2,2,1,1,1)
  properties: dry mass 1 kg, price 0.149 EUR2005, wet mass 1 kg
- lubricating oil: 6.3e-5 kg; lognormal variance with pedigree 0.0013, pedigree (2,2,4,1,1)
  properties: carbon content, fossil 0.75, dry mass 1 kg, heating value, net 40.2 MJ, wet mass 1 kg
- manganese: 0.00875 kg; lognormal variance with pedigree 0.0013, pedigree (2,2,4,1,1)
  properties: dry mass 1 kg, wet mass 1 kg
- refractory spent pot liner from Al electrolysis: -1.38889e-10 kg; lognormal variance with pedigree 0.0013, pedigree (2,2,1,1,1)
  properties: dry mass 1 kg, wet mass 1 kg
- refractory, basic, packed: 1.38889e-10 kg; lognormal variance with pedigree 0.0006, pedigree (1,1,4,1,1)
  properties: dry mass 1 kg, wet mass 1 kg
- sodium hydroxide, without water, in 50% solution state: 1.08e-5 kg; lognormal variance with pedigree 0.0013, pedigree (2,2,4,1,1)
  properties: dry mass 1 kg, heating value, net 3.03 MJ, wet mass 1 kg
- sodium hypochlorite, without water, in 15% solution state: 2.93e-5 kg; lognormal variance with pedigree 0.0013, pedigree (2,2,4,1,1)
  properties: dry mass 1 kg, wet mass 1 kg
- tap water: 0.8576 kg; lognormal variance with pedigree 0.0013, pedigree (2,2,4,1,1)
  properties: carbon content, fossil 0.00178991, dry mass 0.000337476 kg, water content 2962.17, wet mass 1 kg
- vegetable oil, refined: 0.000245333 kg; lognormal variance with pedigree 0.0013, pedigree (2,2,4,1,1)
  properties: carbon content, non-fossil 0.768, dry mass 1 kg, heating value, net 38.4 MJ, wet mass 1 kg
- waste mineral oil: -0.000308333 kg; lognormal variance with pedigree 0.0006, pedigree (1,1,1,1,1)
  properties: carbon content, fossil 0.864444, dry mass 0.9 kg, heating value, net 34.7 MJ, water content 0.111111, wet mass 1 kg
- wastewater, average: -0.000813 m3; lognormal variance with pedigree 0.0013, pedigree (2,2,1,1,1)
  properties: carbon content, non-fossil 0.194039, dry mass 0.346837 kg, water content 2882.2, wet mass 1000 kg

## Emissions to nature
- Water [air, non-urban air or from high stacks]: 4.43e-5 m3; lognormal variance with pedigree 0.048, pedigree (4,2,4,1,1)

## Sampling procedure
Primary data collected from one manufacturing facility in Québec which represents majority of the regional production.

## Extrapolations
This dataset is based on primary data from one facility producing low-alloy aluminium bars by continuous horizontal casting in Quebec and extrapolated to the production of the entire region.
