# wood chips production, softwood, at sawmill

Dataset: EcoSpold 2, unit process
Geography: CA-QC
Time period: 2011-01-01 to 2022-12-31
Technology level: current
Classification: ISIC rev.4 ecoinvent: 1610:Sawmilling and planing of wood
Tags: recontextualization
Scenario: Business-as-Usual
System model: Substitution, consequential, long-term
Generated by: Hugues Imbeault-Tétreault
Published in: Lignum 2010
Database: ecoinvent
isCopyrightProtected: true
accessRestrictedTo: 1

## General comment
This data represents the service of wood chipping to output one kg of dry mass wood chips. The dataset represents the use of a chipper in sawmill and is equivalent to the direct chipping in a profile chipper (see below). The exchanges of this child dataset are identical to the GLO dataset. This dataset was created to enable linking to regional markets (e.g. for electricity). Data quality indicators were adjusted accordingly.
The process chain in a sawmill is a net of interlinked processes; the process structure depends on the individual design and technologies in place for each sawmill. The structuring of the sawmilling processes is based on the identification of the core processes in a sawmill that are attributable to several co-products (such as upstream processes like forestry and transport of logs to the sawmill) sorting, storing and the sawing of the (debarked) log. Other processes are attributable directly to one of the co-products such as the chipping of residual wood (either after sawing or as part of the profile chipping), the chipping of the bark (the "debarking") or the suction of saw dust as collection and internal transport.
The following figure illustrates the general structure of the sawmilling processes before eventual drying and planing:
The data was provided by and approved by the Swiss forest industry (Holzindustrie Schweiz HIS).

## Included activities start
Wood chipping process starting from industrial residual wood (sidings and squarings) whith an electric stationary chipper or directly from the log (in the case of profile chippers) at sawmill site.

## Included activities end
This activity ends with wood chips wood at sawmill site. The dataset does not include direct wood dust emissions to the air from the chipper.

## Geography
Extrapolated from average Swiss conditions. Child dataset exchanges identical to GLO dataset. Dataset created to enable linking to regional markets (e.g. for electricity). Data quality indicators adjusted accordingly.

## Reference product
- slab and siding, softwood, wet, measured as dry mass: 1 kg; By-product classification allocatable product; CPC 31600: Builders' joinery and carpentry of wood (including cellular wood panels, assembled parquet panels, shingles an[…]; lognormal variance with pedigree 0.0026, pedigree (2,1,4,5,1)
  production volume 1 kg
  properties: carbon allocation 0.494 kg, carbon content 0.494, carbon content, fossil 0, carbon content, non-fossil 0.494, dry mass 1 kg, heating value, net 7.79 MJ, price 0 EUR2005, water content 0.7, water in wet mass 0.7 kg, wet mass 1.7 kg

## Inputs from technosphere
- chipper, stationary, electric: -5.3e-8 unit; lognormal variance with pedigree 0.43, pedigree (2,1,4,5,1)
- electricity, medium voltage: -0.0258 kWh; lognormal variance with pedigree 0.2, pedigree (2,1,4,5,1)
- lubricating oil: -2.04e-6 kg; lognormal variance with pedigree 0.0026, pedigree (2,1,4,5,1)
  properties: carbon content, fossil 0.75, dry mass 1 kg, heating value, net 40.2 MJ, wet mass 1 kg
- steel, low-alloyed, hot rolled: -4.08e-6 kg; lognormal variance with pedigree 0.43, pedigree (2,1,4,5,1)
  properties: carbon content, fossil 0.005, dry mass 1 kg, wet mass 1 kg
- wood chips, wet, measured as dry mass: 1 kg
  properties: carbon content, non-fossil 0.494, dry mass 1 kg, heating value, net 10.84 MJ, price 0.107 EUR2005, water content 0.7, wet mass 1.7 kg

## Sampling procedure
complementary literature and sampling from sawmills

## Extrapolations
Copy of Swiss data. Child dataset exchanges identical to GLO dataset. Dataset created to enable linking to regional markets (e.g. for electricity). Data quality indicators adjusted accordingly.
