# calcined clay production

Dataset: EcoSpold 2, unit process
Geography: RoW
Time period: 2015-01-01 to 2022-12-31
Technology level: current
Classification: ISIC rev.4 ecoinvent: 2399:Manufacture of other non-metallic mineral products n.e.c.
Scenario: Business-as-Usual
System model: Substitution, consequential, long-term
Generated by: Daniela Baumann
Published in: Vieira, Silvia Regina Soares S 2015
Database: ecoinvent
isCopyrightProtected: true
accessRestrictedTo: 1

## General comment
This dataset represents the production of calcined clay, a pozzolanic material used in cement production.
Calcined clay is produced by grinding and heating of natural clay between 500°C and 900°C. This thermal treatment (activation) converts crystalline clay materials to amorphous alumino silicates (Barger et al., 2001). When added to cement, amorphous silica reacts with calcium hydroxide formed during calcium silicate hydration from cement, forming C-S-H (hydrated calcium silicate). Secondary reactions may occur due to the reactive alumina content of calcined clay, forming also C-A-H (hydrated calcium aluminate) (Silva, 2007).
The addition of calcined clay to cement result in higher sulphate-resistance of the hydrated paste and in low permeability of the cementitious matrix, thus increasing the durability of cementitious products (Barger et al., 2001).
This dataset is based on key process parameters informed by one cement manufacturer in Brazil, namely electricity consumption and fuel consumption (petroleum coke) for grinding and calcination operations. Air emissions are modelled based on emission factors from IPCC. Although simplified and with an unknown representativeness, this dataset illustrates the production process of calcined clay in Brazil.
Barger, G. S. et al. Production and use of calcined natural pozzolans in concrete. Cement, concrete and aggregates, v. 23, n. 2, 2001, pp. 73-80
Silva, M. G. Cimentos Portland com adições minerais (Portland cement with mineral additions). In. Materiais de Construção Civil e Princípios de Ciência e Engenharia dos Materiais, ed. Isaia, G. C. São Paulo: IBRACON, 2007. pp. 761-794.

## Included activities start
From reception of fuels and clay from the clay pit - quarying operations not included.

## Included activities end
The activity included the grinding and calcination of clay and ends with calcined clay ready to be shipped. Particulate emission is not considered due to lack of data. Infrastructure and administration not included due to lack of data.

## Geography
This dataset is a copy of the corresponding BR dataset. Uncertainty has been adjusted accordingly.

## Technology
Current technology for calcined clay production in Brazil.

## Time period
Time period starts in 2015 as data refer to this year.

## Parameters
- energy heat: 2.05153 MJ; name energy; = UnitConversion(490, 'kilocalorie ISO IT', 'MJ')
  Thermal energy consumption for calcination (490 kcal/kg of calcined clay).

## Reference product
- calcined clay: 1 kg; By-product classification allocatable product; CPC 379: Other non-metallic mineral products n.e.c.
  production volume 8.12887e9 kg
  properties: carbon allocation 0 kg, carbon content 0, carbon content, fossil 0, carbon content, non-fossil 0, dry mass 1 kg, price 0.075 EUR2005, water content 0, water in wet mass 0 kg, wet mass 1 kg

## Inputs from technosphere
- clay: 1.2998, 0.000199515 kg (2 suppliers, which the file names only by identifier); sum of these 1.3 kg; lognormal variance with pedigree 0.0018, pedigree (2,3,1,5,1)
  properties: dry mass 1 kg, water content 0.3, wet mass 1.3 kg
- electricity, medium voltage: 2.80877e-5, 3.29766e-5, 0.000480606, 4.17143e-6, 6.60217e-5, 7.47127e-7, 1.84752e-5, 0.00040403, 8.16345e-5, 2.07214e-5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 kWh (30 suppliers, which the file names only by identifier); sum of these 0.025 kWh; lognormal variance with pedigree 0.0018, pedigree (2,3,1,5,1)
- petroleum coke: 0.0631241 kg; lognormal variance with pedigree 0.0018, pedigree (2,3,1,5,1)
  properties: carbon content, fossil 0.885, carbon dioxide factor 97.5 kg/GJ, dinitrogen monoxide factor 0.0006 kg/GJ, dry mass 1 kg, heating value, net 32.5 MJ, methane factor 0.003 kg/GJ, wet mass 1 kg

## Emissions to nature
- Carbon dioxide, fossil [air, unspecified]: 0.200024 kg; lognormal variance with pedigree 0.0018, pedigree (2,3,1,5,1)
- Dinitrogen monoxide [air, unspecified]: 1.23092e-6 kg; lognormal variance with pedigree 0.0412, pedigree (2,3,1,5,1)
- Methane, fossil [air, unspecified]: 6.1546e-6 kg; lognormal variance with pedigree 0.0412, pedigree (2,3,1,5,1)
- Water [air, unspecified]: 0.0003 m3; lognormal variance with pedigree 0.0412, pedigree (2,3,1,5,1)

## Sampling procedure
Data were provided by one Brazilian cement manufacturer who also produces calcined clay for its own consumption.
Clay humidity, thermal energy consumption and electrity consumption were informed per tons of calcined clay produced.
IPCC net heating value and greenhouse gases emission for petroleum coke were used to calculate fuel consumption in terms of mass and corresponding air emissions from combustion. Water emissions to air were estimated based on clay humidity informed by the manufacturer.
Air emissions other than greenhouse gases, including particulates, were not estimated due to lack of data. For the same reason, administration and infrastructure are not included.
Uncertainty was estimated using default basic uncertainty values and Pedigree scores.
The amounts of the exchanges were calculated as described. No conversion to the geometric mean of the lognormal distribution was done, for consistency reasons with other ecoinvent datasets.

## Extrapolations
This dataset is created as copy of the corresponding regional BR dataset.
