# transport, passenger car, small size, diesel, EURO 5

Dataset: EcoSpold 2, unit process
Geography: RoW
Time period: 2012-01-01 to 2022-12-31
Technology level: current
Classification: ISIC rev.4 ecoinvent: 4922:Other passenger land transport
Tags: internal combustion engine
Scenario: Business-as-Usual
System model: Substitution, consequential, long-term
Generated by: Andrew Simons
Database: ecoinvent
isCopyrightProtected: true
accessRestrictedTo: 1

## General comment
This dataset represents the service of transport in a passenger car for a journey length of 1vkm. The data used for the creation of the global datasets are initially based on European data. Fuel consumption and emissions are for average vehicle use and not representative of a specific driving cycle. The dataset is parametrized with respect to vehicle size, fuel consumption and vehicle lifetime.
Datasets for three different passenger car categories are available in ecoinvent in view of size: small, medium and large.
The category “small” includes passenger cars with engine size up to 1.4 liters. The average weight of this category is estimated to be 1200 kg.
The category “medium” includes passenger cars with engine size between 1.4 and 2.0 liters. The average weight of this category is estimated to be 1600 kg.
The category “large” includes passenger cars with engine size larger than 2.0 liters. The average weight of this category is estimated to be 2000 kg.
The passenger car size influences the amount of both exhaust and non-exhaust emissions. The exhaust emissions caused by the burning of fuel are divided into two groups: fuel dependent emissions (dependent on fuel type and quantity) and Euro class dependent emissions which reflect the emission standards which the vehicle complies with. Three classes of Euro engine type are considered: Euro 3, Euro 4 and Euro 5. The higher the class (e.g. Euro 5), the lower the emissions and viceversa. The Euro engine regulation is set by the European Commission “in order to limit as much as possible the negative impact of road vehicles on the environment and health” (European Commission 2012). This dataset considers a small petrol passenger car of Euro 5 class. Also included within the direct exchanges to the environment are the fuel evaporation emissions from the fuel tank, relevant to petrol vehicles only.
Non-exhaust emissions are those resulting from tyre, brake and road wear. These emissions are considered as by-products.

Reference: European Commission - Mobility and transport. (n.d.). Euro 5 and Euro 6 standards: reduction of pollutant emissions from light. Retrieved May 31, 2012, from http://ec.europa.eu/transport/index_en.htm: http://ec.europa.eu/transport/urban/vehicles/doc/legislation_guide_other.pdf

## Included activities start
The construction of the datasets allows changing key parameters (vehicle size, fuel type and fuel consumption). However, it is important to consider that changing one parameter of a vehicle, e.g. its mass, may lead to changes in other parameters, e.g. the consumption. When modifying the default parameters given, attention should be paid to the possible influence which one parameter may have over the other.

## Included activities end
The activity ends with the transport over 1vkm and the emissions of exhaust and non-exhaust emissions into air, water and soil.

The dataset includes the construction, operation, maintenance and disposal of the vehicle and road infrastructure. Operation of the vehicle includes all the direct emissions produced by fuel combustion and evaporation as well as from tyre, brake and road wear.

## Technology
Transport in a passenger car with internal combustion engine, fueled by petrol. The size is small, with engine size up to 1.4 litres and average weight of 1200 kg.
Technology classifications are based on those used widely within the works of the European Environment Agency, particularly in the Emissions Inventory Guidebook. The Tremove model - which is also used to generate fuel consumption and emission factors for the datasets presented here - follows this classification system.

## Parameters
- annual total vkm: 2.31e10 km; name annual_vkm; = 2.31E+10; lognormal variance with pedigree 0.0021, pedigree (2,2,2,4,1)
  Based on Tremove (2009)
- co2 per kg diesel: 3.14 kg; name co2_kg_diesel; lognormal variance with pedigree 0.0021, pedigree (2,2,2,4,1)
  Constant for all diesel vehicles
- emissions from brake friction: 4.45e-9 kg/kg vehicle; name brake_wear_emissions; lognormal variance with pedigree 0.0015, pedigree (2,2,2,1,1)
  average (small, medium and large weight class) emissions produced per kg vehicle.
  Calculation of non-exhaust emissions (tyre, brake and road wear emissions as well as petrol evaporation emissions) are based on: Ntziachristos, L., Boulter, P. (2009b). EMEP/EEA air pollutant emissions inventory guidebook 2009: Road vehicle tyre and brake wear; Road surface wear. Copenhagen, European Environment Agency
- emissions from road abrasion: 9.79e-9 kg/kg vehicle; name road_wear_emissions; lognormal variance with pedigree 0.0015, pedigree (2,2,2,1,1)
  average (small, medium and large weight class) emissions produced per kg vehicle. example:
  small medium large average
  kg/km kg/km kg/km kg/km
  1.25E-08 9.38E-09 7.500E-09 9.79E-09
  Calculation of non-exhaust emissions (tyre, brake and road wear emissions as well as petrol evaporation emissions) are based on: Ntziachristos, L., Boulter, P. (2009b). EMEP/EEA air pollutant emissions inventory guidebook 2009: Road vehicle tyre and brake wear; Road surface wear. Copenhagen, European Environment Agency
- emissions from tyre abrasion: 5.725e-8 kg/kg vehicle; name tyre_wear_emissions; lognormal variance with pedigree 0.0015, pedigree (2,2,2,1,1)
  average (small, medium and large weight class) emissions produced per kg vehicle. example:
  small medium large average
  kg/vkm kg/vkm kg/vkm kg/vkm
  6.611E-08 6.343E-08 6.258E-08 6.404E-08
  Calculation of non-exhaust emissions (tyre, brake and road wear emissions as well as petrol evaporation emissions) are based on: Ntziachristos, L., Boulter, P. (2009b). EMEP/EEA air pollutant emissions inventory guidebook 2009: Road vehicle tyre and brake wear; Road surface wear. Copenhagen, European Environment Agency.
- european to global total vkm scaling factor: 5.7 dimensionless; name global_scaling_factor; lognormal variance with pedigree 0.0118, pedigree (3,3,4,4,1)
  Estimation
- fuel consumption constant: 2.93e-5 dimensionless; name fc_constant; = 2.930000E-05; lognormal variance with pedigree 0.0021, pedigree (2,2,2,4,1)
  Determined from analysing the fuel consumption for vehicles in the Tremove model (2009)
- fuel consumption of basis vehicle: 0.0388 dimensionless; name fc_basis_vehicle; lognormal variance with pedigree 0.0021, pedigree (2,2,2,4,1)
  Fuel consumption as derived from the source data for each vehicle type, size and emissions standard
- gross vehicle weight: 1297.2 kg; name gross_vehicle_weight; = vehicle_weight+(1.62*60); lognormal variance with pedigree 0.0021, pedigree (2,2,2,4,1)
  It corresponds to the following formula:
  weight of the vehicle + ((average load * 60 kg / 1000).
  The estimated average load is 1620 kg and the estimated weight of a passengeris 60 kg.
- lifetime of the vehicle: 150000 km; name vehicle_lifetime_km; lognormal variance with pedigree 0.0021, pedigree (2,2,2,4,1)
  distance capacity in the assumed vehicle lifetime.
  Reference: Althaus & gauch, Vergleichende Oekobilanz individueller Mobilität: Elektromobilität versus konventionelle Mobilität mit Bio- und fossilen Treibstoffen, EMPA, Dübendorf, 2010
- passenger load factor: 97.2 kg; name LF_passengers; = passengers*60; lognormal variance with pedigree 0.0021, pedigree (2,2,2,4,1)
  Number of passengers multiplied by 60 kg per passenger
- passengers: 1.62 unit; lognormal variance with pedigree 0.0021, pedigree (2,2,2,4,1)
  Average number of passengers in passenger car 1.62
- scaling factor: 0.967742 dimensionless; name scaling_factor; = (vehicle_weight/1240); lognormal variance with pedigree 0.0012, pedigree (2,1,1,1,1)
  The weight of a vehicle determines the non-exhaust emissions of tyre, brake and road wear, reported in kg/kg vehicle.
  The non-exhaust emissions (kg) are calculated multiplying vehicle’s non-exhaust emissions (kg/kg vehicle) by the scaled vehicle weight (kg vehicle).
  The input passenger car weighs 1240 kg. The scaling factor is given by vehicle weight/input passenger car weight. Therefore: the scaling factor is 1200/1240 for small passenger cars.
- so2 per kg diesel: 2e-5 kg; name so2_kg_diesel; = 2.0e-5; lognormal variance with pedigree 0.0021, pedigree (2,2,2,4,1)
  Constant for all diesel vehicles
- weight of the basis vehicle: 1240 kg/unit; name basis_vehicle_weight; lognormal variance with pedigree 0.0021, pedigree (2,2,2,4,1)
  The basis vehicle is the one on which the original life cycle inventory was conducted. It is representative of a VW Golf.
- weight of the vehicle: 1200 kg/unit; name vehicle_weight; lognormal variance with pedigree 0.0015, pedigree (2,2,2,1,1)
  A scaling factor is used to adjust to the vehicle weight chosen in this dataset.
  The weight of a vehicle determines the non-exhaust emissions of tyre, brake and road wear, reported in kg/kg vehicle. The non-exhaust emissions (kg) are calculated multiplying vehicle’s non-exhaust emissions (kg/kg vehicle) by the scaled vehicle weight (kg vehicle).
  Passenger cars are divided into three classes of weight, whereas this dataset has implemented the value valid for a small car: 1200 kg.

## Reference product
- transport, passenger car, small size, diesel, EURO 5: 1 km; By-product classification allocatable product; CPC 64119: Other land transportation services of passengers, n.e.c.
  production volume 1.0857e11 km
  properties: carbon allocation 0 kg, carbon content 0, price 0.112785 EUR2005

## Inputs from technosphere
- brake wear emissions, passenger car: -5.77254e-6 kg; lognormal variance with pedigree 0.0021, pedigree (2,2,2,4,1)
- diesel, low-sulfur: 0.0354088, 0.0014832, 0.00146922, 0.000222943, 0.00296542, 9.83705e-5 kg (6 suppliers, which the file names only by identifier); sum of these 0.041648 kg; lognormal variance with pedigree 0.0021, pedigree (2,2,5,4,1)
  properties: carbon content, fossil 0.865, dry mass 1 kg, heating value, net 42.8 MJ, wet mass 1 kg
- passenger car maintenance: 6.45161e-6 unit; lognormal variance with pedigree 0.0021, pedigree (2,2,5,4,1)
- passenger car, diesel: 0.008 kg; lognormal variance with pedigree 0.0021, pedigree (2,2,5,4,1)
- road: 0.000696596 m*year; lognormal variance with pedigree 0.0021, pedigree (2,2,5,4,1)
- road maintenance: 0.000265427 m*year; lognormal variance with pedigree 0.0021, pedigree (2,2,5,4,1)
- road wear emissions, passenger car: -1.26996e-5 kg; lognormal variance with pedigree 0.0021, pedigree (2,2,2,4,1)
- tyre wear emissions, passenger car: -7.42647e-5 kg; lognormal variance with pedigree 0.0021, pedigree (2,2,2,4,1)

## Emissions to nature
- Acetaldehyde [air, urban air close to ground]: 1.082e-6 kg; lognormal variance with pedigree 0.0021, pedigree (2,2,5,4,1)
- Acetone [air, urban air close to ground]: 4.917e-7 kg; lognormal variance with pedigree 0.0021, pedigree (2,2,5,4,1)
- Acrolein [air, urban air close to ground]: 5.987e-7 kg; lognormal variance with pedigree 0.0021, pedigree (2,2,5,4,1)
- Ammonia [air, urban air close to ground]: 6.66367e-7 kg; lognormal variance with pedigree 0.0021, pedigree (2,2,5,4,1)
- Benzaldehyde [air, urban air close to ground]: 1.438e-7 kg; lognormal variance with pedigree 0.0021, pedigree (2,2,5,4,1)
- Benzene [air, urban air close to ground]: 3.311e-7 kg; lognormal variance with pedigree 0.0021, pedigree (2,2,5,4,1)
- Butane [air, urban air close to ground]: 1.84e-8 kg; lognormal variance with pedigree 0.0021, pedigree (2,2,5,4,1)
- Cadmium II [air, urban air close to ground]: 4.1648e-10 kg; lognormal variance with pedigree 0.0021, pedigree (2,2,5,4,1)
- Carbon dioxide, fossil [air, urban air close to ground]: 0.130775 kg; lognormal variance with pedigree 0.0021, pedigree (2,2,5,4,1)
- Carbon monoxide, fossil [air, urban air close to ground]: 5.83e-5 kg; lognormal variance with pedigree 0.0021, pedigree (2,2,5,4,1)
- Chromium III [air, urban air close to ground]: 2.0824e-9 kg; lognormal variance with pedigree 0.0021, pedigree (2,2,5,4,1)
- Chromium VI [air, urban air close to ground]: 4.1648e-12 kg; lognormal variance with pedigree 0.0021, pedigree (2,2,5,4,1)
- Copper ion [air, urban air close to ground]: 7.08015e-8 kg; lognormal variance with pedigree 0.0021, pedigree (2,2,5,4,1)
- Cyclohexane (for all cycloalkanes) [air, urban air close to ground]: 1.087e-7 kg; lognormal variance with pedigree 0.0021, pedigree (2,2,5,4,1)
- Dinitrogen monoxide [air, urban air close to ground]: 2.0824e-6 kg; lognormal variance with pedigree 0.0021, pedigree (2,2,5,4,1)
- Ethane [air, urban air close to ground]: 5.519e-8 kg; lognormal variance with pedigree 0.0021, pedigree (2,2,5,4,1)
- Ethylene oxide [air, urban air close to ground]: 1.835e-6 kg; lognormal variance with pedigree 0.0021, pedigree (2,2,5,4,1)
- Formaldehyde [air, urban air close to ground]: 2.007e-6 kg; lognormal variance with pedigree 0.0021, pedigree (2,2,5,4,1)
- Heptane [air, urban air close to ground]: 3.345e-8 kg; lognormal variance with pedigree 0.0021, pedigree (2,2,5,4,1)
- Lead II [air, urban air close to ground]: 3.43596e-15 kg; lognormal variance with pedigree 0.0021, pedigree (2,2,5,4,1)
- Mercury II [air, urban air close to ground]: 8.32959e-13 kg; lognormal variance with pedigree 0.0021, pedigree (2,2,5,4,1)
- Methane, fossil [air, urban air close to ground]: 1.75e-6 kg; lognormal variance with pedigree 0.0021, pedigree (2,2,5,4,1)
- Methyl ethyl ketone [air, urban air close to ground]: 2.007e-7 kg; lognormal variance with pedigree 0.0021, pedigree (2,2,5,4,1)
- NMVOC, non-methane volatile organic compounds [air, urban air close to ground]: 8.867e-6 kg; lognormal variance with pedigree 0.0021, pedigree (2,2,5,4,1)
- Nickel II [air, urban air close to ground]: 2.91536e-9 kg; lognormal variance with pedigree 0.0021, pedigree (2,2,5,4,1)
- Nitrogen oxides [air, urban air close to ground]: 0.00066714 kg; lognormal variance with pedigree 0.0019, pedigree (2,2,4,4,1)
- PAH, polycyclic aromatic hydrocarbons [air, urban air close to ground]: 7.67988e-9 kg; lognormal variance with pedigree 0.0021, pedigree (2,2,5,4,1)
- Particulate Matter, < 2.5 um [air, urban air close to ground]: 1.9141e-6 kg; lognormal variance with pedigree 0.0019, pedigree (2,2,4,4,1)
- Pentane [air, urban air close to ground]: 6.69e-9 kg; lognormal variance with pedigree 0.0021, pedigree (2,2,5,4,1)
- Propane [air, urban air close to ground]: 1.84e-8 kg; lognormal variance with pedigree 0.0021, pedigree (2,2,5,4,1)
- Propylene oxide [air, urban air close to ground]: 6.021e-7 kg; lognormal variance with pedigree 0.0021, pedigree (2,2,5,4,1)
- Selenium IV [air, urban air close to ground]: 4.1648e-10 kg; lognormal variance with pedigree 0.0021, pedigree (2,2,5,4,1)
- Styrene [air, urban air close to ground]: 6.188e-8 kg; lognormal variance with pedigree 0.0021, pedigree (2,2,5,4,1)
- Sulfur dioxide [air, urban air close to ground]: 8.32959e-7 kg; lognormal variance with pedigree 0.0021, pedigree (2,2,5,4,1)
- Toluene [air, urban air close to ground]: 1.154e-7 kg; lognormal variance with pedigree 0.0021, pedigree (2,2,5,4,1)
- Zinc II [air, urban air close to ground]: 4.1648e-8 kg; lognormal variance with pedigree 0.0021, pedigree (2,2,5,4,1)
- m-Xylene [air, urban air close to ground]: 1.02e-7 kg; lognormal variance with pedigree 0.0021, pedigree (2,2,5,4,1)
- o-Xylene [air, urban air close to ground]: 4.516e-8 kg; lognormal variance with pedigree 0.0021, pedigree (2,2,5,4,1)

## Sampling procedure
Literature
