# treatment of bottom ash, MSWI-WWT, WW from PV cell production, slag compartment

Dataset: EcoSpold 2, unit process
Geography: GLO
Time period: 1994-01-01 to 2022-12-31
Technology level: current
Classification: ISIC rev.4 ecoinvent: 3821:Treatment and disposal of non-hazardous waste
Scenario: Business-as-Usual
System model: Substitution, consequential, long-term
Generated by: Nikolia Stoikou
Database: ecoinvent
isCopyrightProtected: true
accessRestrictedTo: 1

## General comment
The process represents the treatment of a waste (bottom ash) that is exclusively generated from another waste treatment. Bottom ash is generated in the municipal solid waste incineration of sewage sludge (with 70% water) that in turn is generated from wastewater treatment of 'wastewater from PV cell production'. Recommended use of this dataset: to be used within the specific chain of treatments for 'wastewater from PV cell production'. Share of biogenic carbon in the sludge: 0%. "PV" stands for "Photovoltaic".

## Included activities start
The activity starts with the waste being available at the gate of the treatment facility. Collection and transportation of the waste to the treatment plant is not included.

## Included activities end
The activity ends with the waste being treated and waste-specific emissions from the slag compartment landfill are released to water (short-term emissions to surface water and long-term emissions to ground water).

## Geography
Modelling parameters affecting the treatment technology are not specific to this geography.

## Technology
Slag compartment for bottom ashes from incineration with base seal and leachate collection system. Recultivation after closure.

## Reference product
- bottom ash, MSWI-WWT, WW from PV cell production: -1 kg; By-product classification Waste; CPC 3932: Ash and residue (except from the manufacture of iron or steel), containing metals or metallic compounds, except[…]
  production volume 109547 kg
  properties: calcium content 0.00984277, carbon allocation 0.00138019 kg, carbon content 0.00152151, carbon content, fossil 0.00152151, carbon content, non-fossil 0, dry mass 0.907116 kg, iron content 0.0304374, nitrogen content 0.000839792, oxygen content 0.521944, phosphorus content 0.0478394, price 0 EUR2005, silicon content 0.387569, titanium content 6.24772e-6, water content 0.102395, water in wet mass 0.092884 kg, wet mass 1 kg

## Inputs from technosphere
- process-specific burdens, slag landfill: 0.00841689, 0.280494, 0.71109 kg (3 suppliers, which the file names only by identifier); sum of these 1 kg
- slag landfill: 1.7778e-9 unit

## Inputs from nature
- Organic carbon, placed in landfill [inventory indicator, waste]: 0.00069009 kg; lognormal variance with pedigree 0.0781, pedigree (1,1,5,1,1)
- Waste mass, total, placed in landfill [inventory indicator, waste]: 1 kg

## Emissions to nature
- Non-hazardous waste disposed [inventory indicator, waste]: 1 kg
- BOD5, Biological Oxygen Demand [water, ground-, long-term]: 0.0005684 kg; lognormal variance with pedigree 0.0781, pedigree (1,1,5,1,1)
- BOD5, Biological Oxygen Demand [water, surface water]: 2.0517e-6 kg; lognormal variance with pedigree 0.5676, pedigree (1,1,5,1,1)
- COD, Chemical Oxygen Demand [water, ground-, long-term]: 0.0017377 kg; lognormal variance with pedigree 0.0781, pedigree (1,1,5,1,1)
- COD, Chemical Oxygen Demand [water, surface water]: 6.2723e-6 kg; lognormal variance with pedigree 0.5676, pedigree (1,1,5,1,1)
- Calcium II [water, ground-, long-term]: 0.0088896 kg; lognormal variance with pedigree 0.0505, pedigree (1,1,5,1,1)
- Calcium II [water, surface water]: 3.8958e-5 kg; lognormal variance with pedigree 0.5159, pedigree (1,1,5,1,1)
- DOC, Dissolved Organic Carbon [water, ground-, long-term]: 0.00068761 kg; lognormal variance with pedigree 0.0781, pedigree (1,1,5,1,1)
- DOC, Dissolved Organic Carbon [water, surface water]: 2.482e-6 kg; lognormal variance with pedigree 0.5676, pedigree (1,1,5,1,1)
- Iron ion [water, ground-, long-term]: 0.014363 kg; lognormal variance with pedigree 0.215, pedigree (1,1,5,1,1)
- Iron ion [water, surface water]: 2.3102e-7 kg; lognormal variance with pedigree 1.3915, pedigree (1,1,5,1,1)
- Nitrate [water, ground-, long-term]: 0.0027366 kg; lognormal variance with pedigree 0.0761, pedigree (1,1,5,1,1)
- Nitrate [water, surface water]: 0.00063705 kg; lognormal variance with pedigree 0.1429, pedigree (1,1,5,1,1)
- Phosphate [water, ground-, long-term]: 0.0017555 kg; lognormal variance with pedigree 4.7374, pedigree (1,1,5,1,1)
- Phosphate [water, surface water]: 2.9307e-6 kg; lognormal variance with pedigree 1.2112, pedigree (1,1,5,1,1)
- Silicon [water, ground-, long-term]: 0.0030081 kg; lognormal variance with pedigree 5.7092, pedigree (1,1,5,1,1)
- Silicon [water, surface water]: 1.2972e-5 kg; lognormal variance with pedigree 1.1298, pedigree (1,1,5,1,1)
- TOC, Total Organic Carbon [water, ground-, long-term]: 0.00068761 kg; lognormal variance with pedigree 0.0781, pedigree (1,1,5,1,1)
- TOC, Total Organic Carbon [water, surface water]: 2.482e-6 kg; lognormal variance with pedigree 0.5676, pedigree (1,1,5,1,1)
- Titanium ion [water, ground-, long-term]: 1.6998e-6 kg; lognormal variance with pedigree 0.6659, pedigree (1,1,5,1,1)
- Titanium ion [water, surface water]: 2.7342e-11 kg; lognormal variance with pedigree 1.6589, pedigree (1,1,5,1,1)

## Extrapolations
Modelling parameters are based on an average slag compartment landfill in Switzerland.
