# maintenance, polymer electrolyte membrane fuel cell 2kW electrical

Dataset: EcoSpold 2, unit process
Geography: RoW
Time period: 2000-01-01 to 2022-12-31
Technology level: current
Classification: ISIC rev.4 ecoinvent: 3314:Repair of electrical equipment
Classification: EcoSpold01Categories: natural gas/cogeneration
Synonyms: proton exchange membrane fuel cell; Polymer Elektrolyt Membran Brennstoffzelle; polymer electrolyte fuel cell; Membran Brennstoffzelle; PEMFC; PEFC
Tags: ConvertedDataset
Scenario: Business-as-Usual
System model: Substitution, consequential, long-term
Generated by: Alex Primas
Published in: Primas A. 2007
Database: ecoinvent
isCopyrightProtected: true
accessRestrictedTo: 1

## General comment
The module reflects the maintenance for a polymer electrolyte membrane (PEM) fuel cell with 2 kW electrical output. Inventory based on information from literature for future production based on manufacturer data. Maintenance is carried out every year or 5'300 h. Every fourth year (21'000 h) reformer catalyst stack replacement and every sixth year (32'000 h) stack replacement is carried out.
[This dataset was already contained in the ecoinvent database version 2. It was not individually updated during the transfer to ecoinvent version 3. Life Cycle Impact Assessment results may still have changed, as they are affected by changes in the supply chain, i.e. in other datasets. This dataset was generated following the ecoinvent quality guidelines for version 2. It may have been subject to central changes described in the ecoinvent version 3 change report (http://www.ecoinvent.org/database/ecoinvent-version-3/reports-of-changes/), and the results of the central updates were reviewed extensively. The changes added e.g. consistent water flows and other information throughout the database. The documentation of this dataset can be found in the ecoinvent reports of version 2, which are still available via the ecoinvent website. The change report linked above covers all central changes that were made during the conversion process.]

## Included activities end
The module includes an estimation for materials and transport used for the maintenance of the PEM fuel cell unit.

## Geography
Process applicable in central European conditions.

## Technology
polymer electrolyte membrane (PEM) fuel cell for stationary cogeneration. Performance, stack lifetime and catalyst use according to expected future values for a serial product. Operation with connection to low pressure gas network. Electrical efficiency 32%, total efficiency 87%.

## Reference product
- maintenance, polymer electrolyte membrane fuel cell, 2kW electrical: 1 unit; By-product classification allocatable product; CPC 87152: Maintenance and repair services of electrical machinery and apparatus n.e.c.
  production volume 3.96633 unit
  properties: carbon allocation 0 kg, carbon content 0, price 51.1542 EUR2005

## Inputs from technosphere
- charcoal: 0.125 kg; lognormal variance with pedigree 0.068, pedigree (4,5,5,5,1)
  properties: carbon content, non-fossil 0.8, dry mass 1 kg, heating value, net 28.4 MJ, wet mass 1 kg
- fuel cell, stack polymer electrolyte membrane, 2kW electrical, future: 0.167 unit; lognormal variance with pedigree 0.368, pedigree (4,5,5,5,1)
- platinum: 0.000375 kg; lognormal variance with pedigree 0.068, pedigree (4,5,5,5,1)
  properties: dry mass 1 kg, wet mass 1 kg
- steel, chromium steel 18/8, hot rolled: 1.2 kg; lognormal variance with pedigree 0.068, pedigree (4,5,5,5,1)
  properties: carbon content, fossil 0.0008, dry mass 1 kg, wet mass 1 kg
- titanium dioxide: 0.035 kg; lognormal variance with pedigree 0.068, pedigree (4,5,5,5,1)
  properties: dry mass 1 kg, wet mass 1 kg
- transport, passenger car: 200 km; lognormal variance with pedigree 0.188, pedigree (4,5,5,5,1)

## Sampling procedure
Literature data and manufacturer information

## Extrapolations
none This dataset has been copied from an original dataset covering the geography CH. The uncertainty has been adjusted accordingly.

## Review by Rolf Frischknecht 2007-08-13
passed
none
