# tin plated chromium steel sheet production, 2 mm

Dataset: EcoSpold 2, unit process
Geography: RoW
Time period: 2001-01-01 to 2022-12-31
Technology level: current
Classification: EcoSpold01Categories: metals/extraction
Classification: ISIC rev.4 ecoinvent: 2410:Manufacture of basic iron and steel
Tags: ConvertedDataset
Scenario: Business-as-Usual
System model: Substitution, consequential, long-term
Generated by: Martin Lehmann
Published in: Kellenberger D. 2007
Database: ecoinvent
isCopyrightProtected: true
accessRestrictedTo: 1

## General comment
The dataset can be applied for tin plated chromium steel sheets, preferably of steel 18/8 and sheet thickness of around 2 mm.
[This dataset was already contained in the ecoinvent database version 2. It was not individually updated during the transfer to ecoinvent version 3. Life Cycle Impact Assessment results may still have changed, as they are affected by changes in the supply chain, i.e. in other datasets. This dataset was generated following the ecoinvent quality guidelines for version 2. It may have been subject to central changes described in the ecoinvent version 3 change report (http://www.ecoinvent.org/database/ecoinvent-version-3/reports-of-changes/), and the results of the central updates were reviewed extensively. The changes added e.g. consistent water flows and other information throughout the database. The documentation of this dataset can be found in the ecoinvent reports of version 2, which are still available via the ecoinvent website. The change report linked above covers all central changes that were made during the conversion process.]

## Included activities end
The dataset describes the production of tin plated chromium steel sheet. Included sub processes are "sheet rolling" and "tin plating". The basic material coated is chromium steel 18/8.

## Geography
Data from an established galvanising company in Central Europe. Data applicable for Europe.

## Technology
Tin plating of chromium steel sheet, including processes of tin plating and sheet rolling.

## Reference product
- tin plated chromium steel sheet, 2 mm: 1 m2; By-product classification allocatable product; CPC 41122: Alloy steel in ingots or other primary forms and semi-finished products of alloy steel
  production volume 2.67763 m2
  properties: carbon allocation 0 kg, carbon content 0, carbon content, fossil 0, carbon content, non-fossil 0, dry mass 15.6365 kg, price 9.86124 EUR2005, water content 0, water in wet mass 0 kg, wet mass 15.6365 kg

## Inputs from technosphere
- sheet rolling, chromium steel: 15.6 kg; lognormal variance with pedigree 0.002, pedigree (1,1,5,5,1)
- steel, chromium steel 18/8, hot rolled: 15.6 kg; lognormal variance with pedigree 0.002, pedigree (1,1,5,5,1)
  properties: carbon content, fossil 0.0008, dry mass 1 kg, wet mass 1 kg
- tin plating, pieces: 1 m2; lognormal variance with pedigree 0.002, pedigree (1,1,5,5,1)

## Sampling procedure
Literature, company information

## Extrapolations
see Geography This dataset has been copied from an original dataset covering the geography RER. The uncertainty has been adjusted accordingly.

## Review by Rolf Frischknecht 2007-11-07
passed
