# transport, freight train, diesel

Dataset: EcoSpold 2, unit process
Geography: ZA
Time period: 2016-04-01 to 2022-03-31
Technology level: current
Classification: EcoSpold01Categories: transport systems/train
Classification: ISIC rev.4 ecoinvent: 4912:Freight rail transport
Scenario: Business-as-Usual
System model: Substitution, consequential, long-term
Share of production covered: 100 %
Generated by: Philippa Notten
Published in: Notten, P.J. 2018
Database: ecoinvent
isCopyrightProtected: true
accessRestrictedTo: 1

## General comment
This dataset represents the transport of one metric ton.km of freight in South Africa by a diesel locomotive. The dataset represents the entire transport life cycle, including the production and maintenance of the locomotive, production and maintenance of the goods wagons, the transportation of goods and the construction, operation, maintenance and disposal of railway track. The scope of this dataset is the operation of the locomotive, which has inputs of locomotive and goods wagon, maintenance (goods wagon and locomotive) and railway track via linking to global datasets, i.e. the infrastructure and maintenance datasets are not South African-specific.
Diesel consumption includes shunting and is calculated from total freight rail diesel usage (Transnet, 2017a) and total metric ton.kms transported using diesel locomotives (19% of total tonne.kms). The total metric ton.kms transported by diesel locomotives is calculated using the fuel efficiency (Transnet, 2017a) and the total tonne.kms of rail freight for 2017. Total metric ton.kms for general rail freight is reported directly (Transnet, 2017b), while metric ton.kms for iron ore and coal exports are calculated from the total tonnages transported (Transnet, 2017b) and the average transport distances. Transport distance is averaged for 2009, 2010 and 2011 for iron ore exports, and modelled by linear regression of 2009, 2010, 2011 and 2016 data for coal exports (Transnet, 2016a; Transnet, 2011; Transnet, 2010). The diesel usage reported by Transnet is the total diesel use (including shunting). Thus the diesel use by diesel freight trains (including shunting) is taken to be the total diesel use reported by Transnet less an estimate of the diesel used for shunting electric locomotives. Diesel use for shunting is estimated at 19% of total diesel use (personal communication with Transnet), with the share of diesel use for shunting electric locomotives apportioned on the basis of metric ton.kms transported by electric locomotives (81% of total metric ton.kms). These figures represent all rail freight movements in South Africa.
Emissions of particulates, nitrogen oxides (NOx) and non-methane volatile organic compounds (NMVOC) are calculated using emission factors from EcoTransIT (2016). South African locomotives are split into UIC I and UIC II emission classes based on the current locomotive fleet (Transnet, 2016b), with the assumption that only the new Class 43 diesel locomotives met UIC II emission standards (TransportWorldAfrica, 2012). The partitioning of particulate emissions into size classes is according to Spielmann et al. (2007). Sulphur dioxide (SO2) emissions are calculated from the sulphur content in local diesel (500 ppm (SAPIA, 2015)) and the assumption that all sulphur is emitted as sulphur dioxide. All other emissions to air are extrapolated on the basis of diesel consumption from the global dataset ("transport, freight train, diesel, GLO, 2004"), with the global dataset derived from data primarily of Swiss/European orgin, described in full in Spielmann et al. (2007).
Locomotive production and maintenance are described in the individual global datasets. Locomotive demand per metric ton.km is calculated from the number of diesel freight locomotives (Transnet, 2016b) and the total metric ton.kms of freight transported by diesel locomotives (see above explanation on how this is calculated). A locomotive lifespan of 40 years is assumed (Spielmann et al., 2007). Goods wagon production and maintenance are described in the individual global datasets. Goods wagon demand per metric ton.km is calculated from the number of goods wagons (Transnet, 2016b) and the total metric ton.kms of freight moved annually by diesel locomotives (calculated as described above). A goods wagon lifespan of 40 years is assumed (Spielmann et al., 2007). The construction, operation, maintenance and disposal of railway track is described in the global dataset. Railway track demand per metric ton.km is calculated from the total length of two-way railway track (Transnet, 2016a), and the total metric ton.kms of diesel freight rail transport (calculated as described above).
References:
Transnet (2017a) Transnet Sustainability Report 2017;
Transnet (2017b) Transnet Integrated Report 2017; Transnet (2016a); Transnet Long Term Planning Framework 2016 - Freight Demand Plan; Transnet (2016b) Transnet Long Term Planning Framework - Rail Development Plan; Transnet (2011) Integrated Annual Report 2011; Transnet (2010) Integrated Annual Report 2010;
Spielmann, M., Bauer, C., Dones, R. & Tuchschmid, M. (2007) Transport Services Data v2.0, ecoinvent association, Zurich, Switzerland.; EcoTransIT (2016) Ecological Transport Information Tool for Worldwide Transports - Methodology and Data Update; SAPIA (2015) Cleaner Fuels II Available at: http://www.sapia.org.za/key-issues/cleaner-fuels-ii; TransportWorldAfrica (2012) GE Transportation & MIC deliver reliable locomotives with high local content on-time. Available at: http://www.transportworldafrica.co.za/2012/06/28/ge-transportation-mic-deliver-reliable-locomotives-with-high-local-content-on-time/ (22 May 2018).

## Included activities start
The scope of this dataset is the operation of the locomotive and wagon train, with inputs of locomotives, goods wagons and railway track (covering their production, maintenance and disposal). The transportation service starts with the demand for diesel and the construction of locomotive, goods wagons and track.

## Included activities end
The dataset ends with the service of transporting freight 1 metric ton.km. . The dataset covers the operation of a diesel locomotive, and includes the consumption of diesel and the associated emissions to air. The dataset calls global datasets on the production and maintenance of a locomotive and goods wagon, as well as the construction, operation, maintenance and disposal of railway track.

## Geography
Demand for diesel, locomotive, goods wagon and railway track from Indian rail transport statistics. Particulate, NOx, SOx and NMVOC emissions from EcoTransIT (2016) applying the emission factors most relevant to South African locomotives (44% non-regulated and 56% UIC II). All other emissions to air extrapolated from global dataset based on diesel consumption.

## Technology
Data is representative of national freight rail for the 2016/2017 financial year

## Reference product
- transport, freight train: 1 metric ton*km; By-product classification allocatable product; CPC 6512: Railway transport services of freight
  production volume 3.04e10 metric ton*km
  properties: carbon allocation 0 kg, carbon content 0, price 0.026 EUR2005

## Inputs from technosphere
- diesel: 0.00394025 kg; lognormal variance with pedigree 0.0012, pedigree (2,1,3,1,1)
  properties: carbon content, fossil 0.865, dry mass 1 kg, heating value, net 42.8 MJ, wet mass 1 kg
- goods wagon: 8.41908e-9 unit; lognormal variance with pedigree 0.3006, pedigree (2,1,3,1,1)
- locomotive: 1.23218e-9 unit; lognormal variance with pedigree 0.3006, pedigree (2,1,3,1,1)
- maintenance, goods wagon: 8.41908e-9 unit; lognormal variance with pedigree 0.3006, pedigree (2,1,3,1,1)
- maintenance, locomotive: 1.23218e-9 unit; lognormal variance with pedigree 0.3006, pedigree (2,1,3,1,1)
- railway track: 9.6793e-5 m*year; lognormal variance with pedigree 0.3006, pedigree (2,1,3,1,1)

## Emissions to nature
- Ammonia [air, unspecified]: 7.87783e-8 kg; lognormal variance with pedigree 0.0912, pedigree (2,3,5,5,3)
- Benzene [air, unspecified]: 3.94025e-7 kg; lognormal variance with pedigree 0.0912, pedigree (2,3,5,5,3)
- Cadmium II [air, unspecified]: 3.94241e-11 kg; lognormal variance with pedigree 0.708, pedigree (4,5,5,5,1)
- Carbon dioxide, fossil [air, unspecified]: 0.012388 kg; lognormal variance with pedigree 0.0012, pedigree (2,1,3,1,1)
- Carbon monoxide, fossil [air, unspecified]: 6.23587e-5 kg; lognormal variance with pedigree 0.6932, pedigree (2,3,5,5,1)
- Chromium III [air, unspecified]: 1.96702e-10 kg; lognormal variance with pedigree 0.708, pedigree (4,5,5,5,1)
- Copper ion [air, unspecified]: 6.69834e-9 kg; lognormal variance with pedigree 0.708, pedigree (4,5,5,5,1)
- Dinitrogen monoxide [air, unspecified]: 3.94025e-7 kg; lognormal variance with pedigree 0.0912, pedigree (2,3,5,5,3)
- Lead II [air, unspecified]: 4.31071e-13 kg; lognormal variance with pedigree 0.708, pedigree (4,5,5,5,1)
- Mercury II [air, unspecified]: 7.87783e-14 kg; lognormal variance with pedigree 0.708, pedigree (4,5,5,5,1)
- Methane, fossil [air, unspecified]: 5.11973e-7 kg; lognormal variance with pedigree 0.0912, pedigree (2,3,5,5,3)
- NMVOC, non-methane volatile organic compounds [air, unspecified]: 7.87287e-6 kg; lognormal variance with pedigree 0.0406, pedigree (2,1,3,1,1)
- Nickel II [air, unspecified]: 2.75087e-10 kg; lognormal variance with pedigree 0.708, pedigree (4,5,5,5,1)
- Nitrogen oxides [air, unspecified]: 9.97355e-5 kg; lognormal variance with pedigree 0.0406, pedigree (2,1,3,1,1)
- Particulate Matter, < 2.5 um [air, unspecified]: 1.48877e-6 kg; lognormal variance with pedigree 0.3006, pedigree (2,1,3,1,1)
- Particulate Matter, > 10 um [air, unspecified]: 1.38286e-5 kg; lognormal variance with pedigree 0.0406, pedigree (2,1,3,1,1)
- Particulate Matter, > 2.5 um and < 10um [air, unspecified]: 1.7961e-5 kg; lognormal variance with pedigree 0.1206, pedigree (2,1,3,1,1)
- Selenium IV [air, unspecified]: 3.94241e-11 kg; lognormal variance with pedigree 0.708, pedigree (4,5,5,5,1)
- Sulfur dioxide [air, unspecified]: 3.94025e-6 kg; lognormal variance with pedigree 0.0012, pedigree (2,1,3,1,1)
- Toluene [air, unspecified]: 1.57362e-7 kg; lognormal variance with pedigree 0.0926, pedigree (3,3,5,5,3)
- Xylene [air, unspecified]: 1.57362e-7 kg; lognormal variance with pedigree 0.0926, pedigree (3,3,5,5,3)
- Zinc II [air, unspecified]: 3.94241e-9 kg; lognormal variance with pedigree 0.708, pedigree (4,5,5,5,1)
- Iron ion [soil, unspecified]: 2.21813e-5 kg; lognormal variance with pedigree 0.25, pedigree (5,5,5,5,5)

## Sampling procedure
Demand for diesel, locomotive, goods wagon and railway track from South African national rail transport statistics and representative of all rail freight movements in the reference year. Particulate, NOx, SOx and NMVOC emissions from EcoTransIT (2016) applying the emission factors most relevant to South African locomotives (non-regulated and UIC II).

## Extrapolations
Emissions to air (other than particulates, NOx, SOx and NMVOC) extrapolated from global dataset on the basis of diesel consumption.
