# colemanite mine operation and beneficiation

Dataset: EcoSpold 2, unit process
Geography: RoW
Time period: 2008-01-01 to 2022-12-31
Technology level: current
Classification: ISIC rev.4 ecoinvent: 0891:Mining of chemical and fertilizer minerals
Classification: EcoSpold01Categories: chemicals/inorganics
Scenario: Business-as-Usual
System model: Substitution, consequential, long-term
Generated by: Eleonora Crenna
Published in: Allard, G. 2013
Database: ecoinvent
isCopyrightProtected: true
accessRestrictedTo: 1

## General comment
This dataset represents the production of 1 kg of calcium borate from colemanite, a naturally occurring mineral containing boron in form of B2O3, which is extracted from open pit sites. The beneficiation process is carried out by disintegration, washing and classification in the size fractions in large sizes. Calcium borate is used in many sectors, for example as flame retardant in resin-based compounds, as a ceramic flux in ceramic glazes, and as additive in fertilizers. This dataset is an extrapolation of the respective regional geography of Turkey, which owns approximately 73% of the world’s boron reserves and 35% in the production and trade of borates. Uncertainty was adjusted accordingly.
References:
Önal, G., & Burat, F. (2008). Boron mining and processing in Turkey. Gospodarka Surowcami Mineralnymi, 24(3), 49-60.
USGS, 2017. Minerals Yearbook - Boron.
[This dataset is meant to replace the following datasets:
- calcium borates production, GLO, 2000 - 2000]

## Included activities start
The activity starts with the mining of colemanite (Ca2B6O11 * 5H2O) from the ground.

## Included activities end
The activity ends with the production of colemanite concentrate.

## Geography
Data are considered to be representative of the global situation.

## Technology
Calcium borates are obtained from surface mining of colemanite (Ca2B6O11 * 5H2O) deposits. Open pit mining requires extensive drilling and blasting to reach load deposits. Ores are removed from the mine and transported to milling and beneficiating plants for concentrating the ore. Concentration, or beneficiation, is carried out by disintegration, washing and classification in the size fractions in large sizes, At Emet Colemanite Concentration plant (Turkey), a colemanite ore of 27% B2O3 content is treated to produce a concentrate having 43% B2O3.
Reference:
Önal, G., & Burat, F. (2008). Boron mining and processing in Turkey. Gospodarka Surowcami Mineralnymi, 24(3), 49-60.

## Time period
date of published literature

## Reference product
- calcium borates: 1 kg; By-product classification allocatable product; CPC 346: Fertilizers and pesticides
  production volume 3.52857e9 kg
  properties: boron content 0.169674, carbon allocation 0 kg, carbon content 0, carbon content, fossil 0, carbon content, non-fossil 0, dry mass 1 kg, price 0.44 EUR2005, water content 0, water in wet mass 0 kg, wet mass 1 kg

## Inputs from technosphere
- blasting: 0.000271 kg; lognormal variance with pedigree 0.2706, pedigree (4,3,5,5,5)
- conveyor belt: 2.78e-8 m; lognormal variance with pedigree 0.5806, pedigree (4,3,5,5,5)
- diesel, burned in building machine: 0.194946 MJ; lognormal variance with pedigree 0.0532, pedigree (4,4,5,5,2)
- electricity, medium voltage: 0.00180313, 0.00342653, 0.00204762, 0.0513819, 4.12325e-5, 0.000196514, 0.000230746, 5.98607e-5, 0.0138658, 0.000463966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 kWh (46 suppliers, which the file names only by identifier); sum of these 0.159259 kWh; lognormal variance with pedigree 0.0532, pedigree (4,4,5,5,2)
- heat, district or industrial, natural gas: 2.89056 MJ; lognormal variance with pedigree 0.0532, pedigree (4,4,5,5,2)
- mine infrastructure, open cast, non-ferrous metal: 1.01181e-10 unit; lognormal variance with pedigree 0.05063, pedigree (4,4,5,2,1)
- non-sulfidic tailing, off-site: -1.44232 kg; lognormal variance with pedigree 0.0526, pedigree (4,4,5,5,1)
  properties: dry mass 0.7 kg, water content 0.428571, wet mass 1 kg
- recultivation, iron mine: 9.42e-5 m2; lognormal variance with pedigree 0.4006, pedigree (4,3,5,5,5)
- wastewater, average: -0.000222117, -5.58212e-6, -0.00092889, -3.3072e-6 m3 (4 suppliers, which the file names only by identifier); sum of these -0.0011599 m3; lognormal variance with pedigree 0.1786, pedigree (4,5,5,5,5)
  properties: carbon content, non-fossil 0.194039, dry mass 0.346837 kg, water content 2882.2, wet mass 1000 kg

## Inputs from nature
- Boron [natural resource, in ground]: 0.169674 kg; lognormal variance with pedigree 0.0526, pedigree (4,4,5,5,1)
- Gangue [natural resource, in ground]: 1.85395 kg; lognormal variance with pedigree 0.0526, pedigree (4,4,5,5,1)
- Occupation, mineral extraction site [natural resource, land]: 0.00706 m2*year; lognormal variance with pedigree 0.3106, pedigree (4,3,5,5,5)
- Transformation, from forest, unspecified [natural resource, land]: 9.42e-5 m2; lognormal variance with pedigree 0.4006, pedigree (4,3,5,5,5)
- Transformation, to mineral extraction site [natural resource, land]: 9.42e-5 m2; lognormal variance with pedigree 0.4006, pedigree (4,3,5,5,5)
- Water, well, in ground [natural resource, in water]: 0.00159259 m3; lognormal variance with pedigree 0.0532, pedigree (4,4,5,5,2)

## Emissions to nature
- Particulate Matter, > 10 um [air, urban air close to ground]: 0.014 kg; lognormal variance with pedigree 0.138, pedigree (4,5,5,5,4)

## Sampling procedure
The data are extrapolated from the TR dataset.

## Extrapolations
This dataset has been extrapolated from the original dataset covering the geography TR. The uncertainty has been adjusted accordingly.
