# transport, passenger train, high-speed

Dataset: EcoSpold 2, unit process
Geography: IT
Time period: 2000-01-01 to 2022-12-31
Technology level: current
Classification: ISIC rev.4 ecoinvent: 4911:Passenger rail transport, interurban
Classification: EcoSpold01Categories: transport systems/train
Scenario: Business-as-Usual
System model: Substitution, consequential, long-term
Generated by: Michael Spielmann (obsolete)
Published in: Spielmann M. 2007
Database: ecoinvent
isCopyrightProtected: true
accessRestrictedTo: 1

## General comment
The dataset represents the entire transport life cycle of high-speed passenger train in Italy. Data of energy use and operation emissions refers to conditions in Germany (ICE-train): Particulate emissions due to abrasion of rail tracks, wheels, brakes and overhead contact line is included. Emission of sulphur hexafluoride (SF6) occurring during conversion at traction substations are accounted for.

## Included activities start
The dataset starts with the production of a high-speed train.

## Included activities end
The dataset ends with the service of transporting 1 passenger over a distance of 1 km by a high-speed train. The dataset includes the production, the maintenance and the energy use and operation emissions of a high-speed train, the construction of a railway track. The inventory of energy use and operation emissions includes the actual energy consumption due to traction and operations on board.

## Geography
Data refers to operation of a high speed train in Italy. Specific energy use and operation emissions refers to the operation of a German ICE, the train is operated with the italian electricity mix. Airborne emission data is extrapolated from Swiss conditions.

## Technology
Demand factors of various transport components required to fulfill the functional unit of one pkm. In order to account for the fact that the same rail tracks are used for both passenger and goods transportation are applied allocation factors. For the energy use and operation emissions data, the operation of the highspeed train is assumed with the german ICE high speed train.

## Time period
Not specified

## Reference product
- transport, passenger train: 1 person*km; By-product classification allocatable product; CPC 64: Passenger transport services
  production volume 8.6e9 person*km
  properties: carbon allocation 0 kg, carbon content 0, price 0.0208844 EUR2005

## Inputs from technosphere
- electricity, high voltage: 0.084903 kWh; lognormal variance with pedigree 0.01, pedigree (1,1,5,1,1)
- maintenance, train, passenger, high-speed: 3.24e-10 unit; lognormal variance with pedigree 0.01, pedigree (1,1,5,1,1)
- railway track, for high-speed train: 0.00013 m*year; lognormal variance with pedigree 0.01, pedigree (1,1,5,1,1)
- train, passenger, high speed: 3.24e-10 unit; lognormal variance with pedigree 0.01, pedigree (1,1,5,1,1)

## Emissions to nature
- Particulate Matter, > 10 um [air, unspecified]: 1.1554e-5 kg; lognormal variance with pedigree 0.21, pedigree (1,1,5,1,1)
- Particulate Matter, > 2.5 um and < 10um [air, unspecified]: 1.0549e-5 kg; lognormal variance with pedigree 0.21, pedigree (1,1,5,1,1)
- Sulfur hexafluoride [air, unspecified]: 3.7357e-9 kg; lognormal variance with pedigree 0.068025, pedigree (3,5,5,2,3)
- Iron ion [soil, unspecified]: 2.8132e-5 kg; lognormal variance with pedigree 0.21, pedigree (1,1,5,1,1)

## Sampling procedure
literature studies

## Extrapolations
see Technology and Geography

## Review by Christian Bauer 2010-02-07
passed.

## Review by Roland Hischier 2011-09-28
Transfer of documentation done.
--> CHECK comments of exchanges ...

## Review by Carl Vadenbo 2012-06-29
In preparation for the release of ecoinvent v3.0, the datasets 'operation, high speed train IT' and 'transport, high speed train IT' in ecoinvent v2.2 were merged into the dataset 'transport, passenger train, high speed, IT 2000'. The amounts of the exchanges were reviewed and were found to correspond to the disaggregated datasets. The field Included Activities End and the uncertainty information need to be revised before subsequent releases of the database. Despite this shortcoming, the new dataset was accepted for inclusion into the ecoinvent database on 2012.07.04.
