# wooden board factory construction, cement bonded boards

Dataset: EcoSpold 2, unit process
Geography: RER
Time period: 2002-01-01 to 2022-12-31
Technology level: current
Classification: ISIC rev.4 ecoinvent: 4290:Construction of other civil engineering projects
Tags: ConvertedDataset; Swiss brush-up completed
Scenario: Business-as-Usual
System model: Substitution, consequential, long-term
Generated by: Frank Werner
Published in: Werner F. 2007
Database: ecoinvent
isCopyrightProtected: true
accessRestrictedTo: 1

## General comment
The service life is assumed to be 50 years. Thus the life time output is 2'500'000 m3 board. This data must only be used to consider the infrastructure needed for wood board production if this is not relevant.
[This dataset was already contained in the ecoinvent database version 2. It was not individually updated during the transfer to ecoinvent version 3. Life Cycle Impact Assessment results may still have changed, as they are affected by changes in the supply chain, i.e. in other datasets. This dataset was generated following the ecoinvent quality guidelines for version 2. It may have been subject to central changes described in the ecoinvent version 3 change report (http://www.ecoinvent.org/database/ecoinvent-version-3/reports-of-changes/), and the results of the central updates were reviewed extensively. The changes added e.g. consistent water flows and other information throughout the database. The documentation of this dataset can be found in the ecoinvent reports of version 2, which are still available via the ecoinvent website. The change report linked above covers all central changes that were made during the conversion process.]

## Included activities end
The land area and the material and their transports needed for for building and disposal of a plant for cement bonded wooden boards with a yearly output of 50'000 m3 is included.

## Geography
Estimate is so rough that the Geograhpy is not relevant.

## Technology
Relates to a medium sized production plant for cement bonded wooden boards using one or several stack-presses.

## Reference product
- wooden board factory, cement bonded boards: 1 unit; By-product classification allocatable product; CPC 53269: Other constructions for manufacturing
  production volume 1.32237 unit
  properties: carbon allocation 0 kg, carbon content 0, price 3.9291e7 EUR2005

## Inputs from technosphere
- building, hall: 5000 m2; lognormal variance with pedigree 0.5681, pedigree (3,5,5,3,3)
  properties: UVEK_link_1 342, UVEK_relative_amount_1 1
- concrete, normal strength: 118.102, 64.8983 m3 (2 suppliers, which the file names only by identifier); sum of these 183 m3; lognormal variance with pedigree 0.0431, pedigree (3,5,5,3,3)
  properties: dry mass 2190 kg, water content 0.086758, wet mass 2380 kg
- conveyor belt: 100 m; lognormal variance with pedigree 0.0431, pedigree (3,5,5,3,3)
  properties: UVEK_link_1 579, UVEK_relative_amount_1 1
- steel, low-alloyed, hot rolled: 403000 kg; lognormal variance with pedigree 0.0431, pedigree (3,5,5,3,3)
  properties: UVEK_link_1 4222, UVEK_link_2 2662, UVEK_link_8 4417, UVEK_link_9 4433, UVEK_relative_amount_1 1, UVEK_relative_amount_2 1, UVEK_relative_amount_8 0.150124, UVEK_relative_amount_9 0.200248, carbon content, fossil 0.005, dry mass 1 kg, wet mass 1 kg
- waste reinforced concrete: -398775, -4225.32 kg (2 suppliers, which the file names only by identifier); sum of these -403000 kg; lognormal variance with pedigree 0.0262, pedigree (2,3,1,1,1)
  properties: UVEK_link_1 883, UVEK_relative_amount_1 -1, dry mass 0.99418 kg, water content 0.00585407, wet mass 1 kg

## Inputs from nature
- Occupation, industrial area [natural resource, land]: 500000 m2*year; lognormal variance with pedigree 0.2181, pedigree (3,5,5,3,3)
- Transformation, from unspecified [natural resource, land]: 10000 m2; lognormal variance with pedigree 0.3681, pedigree (3,5,5,3,3)
- Transformation, to industrial area [natural resource, land]: 10000 m2; lognormal variance with pedigree 0.3681, pedigree (3,5,5,3,3)

## Sampling procedure
estimation
