# heat production, wood chips from industry, at furnace 5000kW

Dataset: EcoSpold 2, unit process
Geography: CH
Time period: 2000-01-01 to 2022-12-31
Technology level: current
Classification: EcoSpold01Categories: wood energy/heating systems
Classification: ISIC rev.4 ecoinvent: 3530:Steam and air conditioning supply
Synonyms: automatic wood heating system
Scenario: Business-as-Usual
System model: Substitution, consequential, long-term
Share of production covered: 100 %
Generated by: Christian Bauer
Database: ecoinvent
isCopyrightProtected: true
accessRestrictedTo: 1

## General comment
This activity represents the combustion of wood chips from industry in Switzerland. Air emission factors as well as the boiler efficiency represent average annual operation including start and stop (warm-up and shut-down). Therefore, emission data will be higher and efficiency will be lower than rated values provided by manufacturers. The inventory shall be considered as being representative for boilers with nominal capacities above 2 MW.

## Included activities start
from delivery of wood chips

## Included activities end
This activity describes the combustion of wood chips from industry. Included are the infrastructure, the wood requirements (hardwood chips from forest), the emissions to air, the electricity needed for operation, and the disposal of the ashes.

## Geography
Represents average Swiss conditions and could be used for Europe as well.

## Technology
Boiler of average technology available on the Swiss market.

## Time period
Key emission factors PM, CO, NMVOC, NOx, CH4 as well as the average annual efficiency have been updated using the latest available information. Other emission data are from the second half of the 1990´s.

## Parameters
- scaling factor: 1.33333 dimensionless; name scaling_factor; = 1/0.75; lognormal variance with pedigree 0.0016, pedigree (2,1,1,1,1)
  The scaling factor corresponds to the inverse of the average annual efficiency of the heating system, including start/stop (warm up and cool down). Therefore, this efficiency will be lower than figures provided by manufacturers. The estimated value was provided by T.Nussbaumer, Verenum, and represents the average installed boiler in this size category in Switzerland.

## Reference product
- wood chips, dry, measured as dry mass: 1 kg; By-product classification allocatable product; CPC 31230: Wood in chips or particles; lognormal variance with pedigree 0, pedigree (1,1,4,1,1)
  production volume 1 kg
  properties: carbon allocation 0.494 kg, carbon content 0.494, carbon content, fossil 0, carbon content, non-fossil 0.494, dry mass 1 kg, heating value, net 9.99 MJ, price 0 EUR2005, water content 0.4, water in wet mass 0.4 kg, wet mass 1.4 kg

## Inputs from technosphere
- dust collector, electrostatic precipitator, for industrial use: -1.96875e-8 unit; lognormal variance with pedigree 0.21, pedigree (2,1,5,1,1)
- electricity, low voltage: -0.078813 kWh; lognormal variance with pedigree 0.21, pedigree (2,1,5,1,1)
- furnace, wood chips, with silo, 5000kW: -1.96875e-8 unit; lognormal variance with pedigree 0.21, pedigree (2,1,5,1,1)
- heat, district or industrial, other than natural gas: 14.175 MJ
  properties: Corresponding fuel use 1.18 MJ, heating value, net 1 MJ, price 0.0106 EUR2005
- wood ash mixture, pure: 0.00945 kg; lognormal variance with pedigree 0.21, pedigree (2,1,4,1,1)
  properties: carbon content, non-fossil 0.012, dry mass 1 kg, wet mass 1 kg

## Emissions to nature
- Acetaldehyde [air, urban air close to ground]: -1.1529e-6 kg; lognormal variance with pedigree 0.21, pedigree (2,1,5,1,1)
- Ammonia [air, urban air close to ground]: -3.2697e-5 kg; lognormal variance with pedigree 0.21, pedigree (2,1,5,1,1)
- Arsenic ion [air, urban air close to ground]: -1.89e-8 kg; lognormal variance with pedigree 0.21, pedigree (2,1,5,1,1)
- Benzene [air, urban air close to ground]: -1.7199e-5 kg; lognormal variance with pedigree 0.21, pedigree (2,1,5,1,1)
- Benzene, ethyl- [air, urban air close to ground]: -5.67e-7 kg; lognormal variance with pedigree 0.21, pedigree (2,1,5,1,1)
- Benzene, hexachloro- [air, urban air close to ground]: -1.3608e-13 kg; lognormal variance with pedigree 0.21, pedigree (2,1,5,1,1)
- Benzo(a)pyrene [air, urban air close to ground]: -9.45e-9 kg; lognormal variance with pedigree 0.21, pedigree (2,1,5,1,1)
- Bromine [air, urban air close to ground]: -1.134e-6 kg; lognormal variance with pedigree 0.21, pedigree (2,1,5,1,1)
- Cadmium II [air, urban air close to ground]: -1.323e-8 kg; lognormal variance with pedigree 0.21, pedigree (2,1,5,1,1)
- Calcium [air, urban air close to ground]: -0.000110565 kg; lognormal variance with pedigree 0.21, pedigree (2,1,5,1,1)
- Carbon dioxide, non-fossil [air, urban air close to ground]: -2.0223 kg; lognormal variance with pedigree 0.21, pedigree (2,1,5,1,1)
- Carbon monoxide, non-fossil [air, urban air close to ground]: -0.00378 kg; lognormal variance with pedigree 0.021, pedigree (2,1,4,1,1)
- Chlorine [air, urban air close to ground]: -3.402e-6 kg; lognormal variance with pedigree 0.21, pedigree (2,1,5,1,1)
- Chromium III [air, urban air close to ground]: -7.4844e-8 kg; lognormal variance with pedigree 0.21, pedigree (2,1,5,1,1)
- Chromium VI [air, urban air close to ground]: -7.56e-10 kg; lognormal variance with pedigree 0.21, pedigree (2,1,5,1,1)
- Copper ion [air, urban air close to ground]: -4.158e-7 kg; lognormal variance with pedigree 0.21, pedigree (2,1,5,1,1)
- Dinitrogen monoxide [air, urban air close to ground]: -4.347e-5 kg; lognormal variance with pedigree 0.21, pedigree (2,1,5,1,1)
- Dioxins, measured as 2,3,7,8-tetrachlorodibenzo-p-dioxin [air, urban air close to ground]: -5.859e-13 kg; lognormal variance with pedigree 0.21, pedigree (2,1,5,1,1)
- Fluorine [air, urban air close to ground]: -9.45e-7 kg; lognormal variance with pedigree 0.21, pedigree (2,1,5,1,1)
- Formaldehyde [air, urban air close to ground]: -2.457e-6 kg; lognormal variance with pedigree 0.21, pedigree (2,1,5,1,1)
- Hydrocarbons, aliphatic, alkanes, unspecified [air, urban air close to ground]: -1.7199e-5 kg; lognormal variance with pedigree 0.21, pedigree (2,1,5,1,1)
- Hydrocarbons, aliphatic, unsaturated [air, urban air close to ground]: -5.859e-5 kg; lognormal variance with pedigree 0.21, pedigree (2,1,5,1,1)
- Lead II [air, urban air close to ground]: -4.725e-7 kg; lognormal variance with pedigree 0.21, pedigree (2,1,5,1,1)
- Magnesium [air, urban air close to ground]: -6.804e-6 kg; lognormal variance with pedigree 0.21, pedigree (2,1,5,1,1)
- Manganese II [air, urban air close to ground]: -3.213e-6 kg; lognormal variance with pedigree 0.21, pedigree (2,1,5,1,1)
- Mercury II [air, urban air close to ground]: -5.67e-9 kg; lognormal variance with pedigree 0.21, pedigree (2,1,5,1,1)
- Methane, non-fossil [air, urban air close to ground]: -2.835e-5 kg; lognormal variance with pedigree 0.21, pedigree (2,1,5,1,1)
- NMVOC, non-methane volatile organic compounds [air, urban air close to ground]: -6.615e-5 kg; lognormal variance with pedigree 0.021, pedigree (2,1,4,1,1)
- Nickel II [air, urban air close to ground]: -1.134e-7 kg; lognormal variance with pedigree 0.21, pedigree (2,1,5,1,1)
- Nitrogen oxides [air, urban air close to ground]: -0.0042525 kg; lognormal variance with pedigree 0.021, pedigree (2,1,4,1,1)
- PAH, polycyclic aromatic hydrocarbons [air, urban air close to ground]: -2.0979e-7 kg; lognormal variance with pedigree 0.21, pedigree (2,1,5,1,1)
- Particulate Matter, < 2.5 um [air, urban air close to ground]: -0.0004725 kg; lognormal variance with pedigree 0.021, pedigree (2,1,4,1,1)
- Phenol, pentachloro- [air, urban air close to ground]: -1.5309e-10 kg; lognormal variance with pedigree 0.21, pedigree (2,1,5,1,1)
- Phosphorus [air, urban air close to ground]: -5.67e-6 kg; lognormal variance with pedigree 0.21, pedigree (2,1,5,1,1)
- Potassium I [air, urban air close to ground]: -0.00044226 kg; lognormal variance with pedigree 0.21, pedigree (2,1,5,1,1)
- Sodium [air, urban air close to ground]: -2.457e-5 kg; lognormal variance with pedigree 0.21, pedigree (2,1,5,1,1)
- Sulfur dioxide [air, urban air close to ground]: -4.725e-5 kg; lognormal variance with pedigree 0.21, pedigree (2,1,5,1,1)
- Toluene [air, urban air close to ground]: -5.67e-6 kg; lognormal variance with pedigree 0.21, pedigree (2,1,5,1,1)
- Water [air, urban air close to ground]: -0.0008505 m3; lognormal variance with pedigree 0.0063, pedigree (2,2,4,1,2)
- Zinc II [air, urban air close to ground]: -5.67e-6 kg; lognormal variance with pedigree 0.21, pedigree (2,1,5,1,1)
- m-Xylene [air, urban air close to ground]: -2.268e-6 kg; lognormal variance with pedigree 0.21, pedigree (2,1,5,1,1)

## Sampling procedure
literature
