# tantalum powder production, capacitor-grade

Dataset: EcoSpold 2, unit process
Geography: RoW
Time period: 2019-01-01 to 2023-12-31
Technology level: current
Classification: ISIC rev.4 ecoinvent: 2420:Manufacture of basic precious and other non-ferrous metals
Scenario: Business-as-Usual
System model: Substitution, consequential, long-term
Generated by: Efstathios Kakkos
Published in: Classen M. 2009
Database: ecoinvent
isCopyrightProtected: true
accessRestrictedTo: 1

## General comment
This dataset refers to the global average extraction and reduction processes applied in the produced tantalum concentrate (30% Ta2O5) in order to produce 1 kg of pure tantalum powder. On a global scale, China is responsible for approximately 48% of the global tantalum powder production, according to Achebe, J. (2016). This dataset is a disaggregation of the activity ''tantalum production, powder, capacitor-grade'' as found in version 3.7 of the Ecoinvent database that produces tantalum powder from tantalite ore and has been copied from an original dataset covering the geography GLO, due to ab-sence of regionalized dataset.
The original data for reduction were provided from a patent from HC Stark Germany. For both the extraction and the refining processes the data were taken from tables 5.5 & 5.7 or already aggregated from figure 5.4, part XI of the Classen et al (2009) report. Specific values were adjusted to reflect today's situation. (consult the sampling procedure and the individual exchange comments). The amount of tantalum concentrate has been adjusted due to the fact that the original datasets assumed a grade of 38% Ta2O5, while in this dataset a grade of 30% is considered (for the calculation of the amount con-sult the respective exchange comment). Other tantalum sources used for the production of pure tantalum powder (from consumer scrap or from tantalum byproduct stemming from tin production) has not been taken into account. Furthermore, the present dataset is meant to be used exclusively in the context of electronic devices, since tantalum production for alloying purposes follows a different production route (for more in-formation, Fig. 5.1 of the abovementioned source is to be consulted).
Reference 1: Classen M., Althaus H.-J., Blaser S.,Tuchschmid M., Jungbluth N., Doka G., Faist Emmeneg-ger M. and Scharnhorst W. (2009) Life Cycle lnventories of Metals. Final report ecoinvent data v2.1, No 10. EMPA Dübendorf, Swiss Centre for Life Cycle lnventories, Dübendorf , CH, Online-Version under: www .ecoinvent.ch.
Reference 2: Achebe, J. (2016). Substance Flow Analysis of Tantalum: Tracking the Conflict-Free Path. In: UWSpace. Link: https://uwspace.uwaterloo.ca/bitstream/handle/10012/10582/Achebe_Jessica.pdf?sequence=3%26isAllowed).

## Included activities start
The activities start with the processing of tantalum concentrate.

## Included activities end
The activities end with the production of pure tantalum powder.

## Allocation
No allocation is applied.

## Geography
Dataset considered valid for the entire corresponding region.

## Technology
After the production of tantalum concentrate (30% Ta2O5), it is digested at high temperature through the use of hydrofluoric and sulfuric acid. The produced Ta solution is filtered - thus removing the insoluble minerals – and then undergoes liquid-liquid separation (solvent extraction) using methyl isobutyl ketone (MIBK) to separate niobium from tantalum. The MIBK in tantalum is stripped from the solution and tantalum is precipitated as hydroxide by adding ammonia (NH3). Then, the hydroxide is calcined in a furnace to produce pure tantalum oxide. The pure tantalum oxide is later reduced to pure tantalum powder by bringing the pure tantalum oxide in contact with magnesium vapour, in a multiple hearth furnace or rotary kiln. The stoichiometric equation is the following: Ta2O5 + 5Mg -> 5MgO + 2Ta. The unreacted magnesium is assumed to be recovered. Sulfuric acid and ultrapure water are then utilized to remove the magnesium oxide, producing magnesium sulfate which is removed from the solution and therefore serves as a by-product that can be further processed.

## Time period
The production of tantalum powder has not undergone significant changes. Therefore, the data are considered representative of current production practices.

## Reference product
- tantalum powder, capacitor-grade: 1 kg; By-product classification allocatable product; CPC 34231: Chemical elements n.e.c.; inorganic acids except phosphoric, nitric and sulphonitric; inorganic oxygen compoun[…]
  production volume 889956 kg
  properties: carbon allocation 0 kg, carbon content 0, carbon content, fossil 0, carbon content, non-fossil 0, dry mass 1 kg, price 290 EUR2005, tantalum content 0.9996, water content 0, water in wet mass 0 kg, wet mass 1 kg

## Inputs from technosphere
- ammonia, anhydrous, liquid: 0.00678218, 0.143208, 0.0333344, 0.0647088, 0.717256, 0.0200775, 0.0303189, 0.0660472 kg (8 suppliers, which the file names only by identifier); sum of these 1.08173 kg; lognormal variance with pedigree 0.0446, pedigree (2,4,5,5,1)
  properties: dry mass 1 kg, wet mass 1 kg
- argon, liquid: 0.015521, 0.07368 kg (2 suppliers, which the file names only by identifier); sum of these 0.089201 kg; lognormal variance with pedigree 0.078, pedigree (4,5,5,5,1)
  properties: dry mass 1 kg, wet mass 1 kg
- chemical factory, organics: 4e-10 unit; lognormal variance with pedigree 0.51, pedigree (5,5,5,5,4)
- electric arc furnace slag: -10.102, -1.57445, -0.237546 kg (3 suppliers, which the file names only by identifier); sum of these -11.914 kg
  properties: aluminium content 0.0393524, calcium content 0.257715, chromium content 0.0174286, dry mass 0.995 kg, fluorine content 0.0201005, iron content 0.16826, magnesium content 0.050462, manganese content 0.0386403, oxygen content 0.265728, silicon content 0.0917304, water content 0.00502513, wet mass 1 kg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
- electricity, medium voltage: 0.0117123, 0.0222571, 0.0133004, 0.000267827, 0.00127646, 0.00149882, 0.000388827, 0.0900657, 0.00301371, 0.148504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 kWh (46 suppliers, which the file names only by identifier); sum of these 0.72 kWh; lognormal variance with pedigree 0.0446, pedigree (2,4,5,5,1)
- heat, district or industrial, natural gas: 0.2806 MJ; lognormal variance with pedigree 0.21, pedigree (5,5,5,5,4)
  properties: heating value, net 1 MJ
- hydrogen fluoride: 0.792479, 2.29819 kg (2 suppliers, which the file names only by identifier); sum of these 3.09067 kg; lognormal variance with pedigree 0.0446, pedigree (2,4,5,5,1)
  properties: dry mass 1 kg, heating value, net 6.06 MJ, wet mass 1 kg
- magnesium: 0.336 kg; lognormal variance with pedigree 0.078, pedigree (4,5,5,5,1)
  properties: dry mass 1 kg, wet mass 1 kg
- sulfuric acid: 0.958588, 3.97741 kg (2 suppliers, which the file names only by identifier); sum of these 4.936 kg; lognormal variance with pedigree 0.0546, pedigree (2,4,5,5,1)
  properties: dry mass 1 kg, wet mass 1 kg
- tantalum concentrate, 30% Ta2O5: 4.28057 kg; lognormal variance with pedigree 0.0452, pedigree (2,4,5,5,1)
  properties: dry mass 1 kg, oxygen content 0.0543, tantalum content 0.2457, wet mass 1 kg
- wastewater from pig iron production: -0.00449584, -0.00107123, -2.69217e-5 m3 (3 suppliers, which the file names only by identifier); sum of these -0.005594 m3
  properties: carbon content, fossil 1.2149e-5, dry mass 0.337476 kg, water content 2962.17, wet mass 1000 kg
- water, ultrapure: 1.1059, 1.54261, 2.0515 kg (3 suppliers, which the file names only by identifier); sum of these 4.7 kg; lognormal variance with pedigree 0.078, pedigree (4,5,5,5,1)
  properties: wet mass 1 kg

## Emissions to nature
- Ammonia [air, non-urban air or from high stacks]: 0.00108173 kg; lognormal variance with pedigree 0.0846, pedigree (2,4,5,5,1)

## Sampling procedure
This dataset refers to the global average extraction and reduction processes applied in the produced tantalum concentrate (30% Ta2O5) in order to produce 1 kg of pure tantalum powder. On a global scale, China is responsible for approximately 48% of the global tantalum powder production, according to Achebe, J. (2016). This dataset is a disaggregation of the activity ''tantalum production, powder, capacitor-grade'' as found in version 3.7 of the Ecoinvent database that produces tantalum powder from tantalite ore and has been copied from an original dataset covering the geography GLO, due to absence of regionalized dataset.

The original data for reduction were provided from a patent from HC Stark Germany. For both the extraction and the refining processes the data were taken from tables 5.5 & 5.7 or already aggregated from figure 5.4, part XI of the Classen et al (2009) report. Specific values were adjusted to reflect today's situation. (consult the sampling procedure and the individual exchange comments). The amount of tantalum concentrate has been adjusted due to the fact that the original datasets assumed a grade of 38% Ta2O5, while in this dataset a grade of 30% is considered (for the calculation of the amount con-sult the respective exchange comment). Other tantalum sources used for the production of pure tantalum powder (from consumer scrap or from tantalum byproduct stemming from tin production) has not been taken into account. Furthermore, the present dataset is meant to be used exclusively in the context of electronic devices, since tantalum production for alloying purposes follows a different production route (for more in-formation, Fig. 5.1 of the abovementioned source is to be consulted).

Reference 1: Classen M., Althaus H.-J., Blaser S.,Tuchschmid M., Jungbluth N., Doka G., Faist Emmenegger M. and Scharnhorst W. (2009) Life Cycle lnventories of Metals. Final report ecoinvent data v2.1, No 10. EMPA Dübendorf, Swiss Centre for Life Cycle lnventories, Dübendorf , CH, Online-Version under: www .ecoinvent.ch.

Reference 2: Achebe, J. (2016). Substance Flow Analysis of Tantalum: Tracking the Conflict-Free Path. In: UWSpace. Link: https://uwspace.uwaterloo.ca/bitstream/handle/10012/10582/Achebe_Jessica.pdf?sequence=3%26isAllowed).

## Extrapolations
The data originated from a patent from the company HC Stark and have been extrapolated to represent the global average production of tantalum powder. The uncertainty has been adjusted accordingly.

## Review by Carl Vadenbo 2021-02-23
The issues raised in the first round of cross-cutting review have been addressed satisfactorily.
Please consider rephrasing the opening statement of the General Comment, instead starting with: "This dataset represents the production of [insert amount and unit of reference product] of [insert name of reference product] from [insert main raw material input and/or production route".
