# stimulation of deep well, for geothermal power

Dataset: EcoSpold 2, unit process
Geography: RoW
Time period: 2015-01-01 to 2022-12-31
Technology level: current
Classification: ISIC rev.4 ecoinvent: 0990:Support activities for other mining and quarrying
Tags: geothermal energy
Scenario: Business-as-Usual
System model: Substitution, consequential, long-term
Generated by: Karin Treyer
Published in: S Hirchberg, S Wiemer, P Burgherr 2015
Database: ecoinvent
isCopyrightProtected: true
accessRestrictedTo: 1

## General comment
This datasets represents the stimulation of a deep well intended to be used for power production in a geothermal power plant.
This inventory includes energy use
and water use only. Potential use of chemicals, such as hydrochloric acid, is neglected due to scarcity of available information on this. Possible greenhouse gas emissions due to the emissions of natural gas from the ground during the stimulation are not considered due to scarcity of experience.
Detailed information on this dataset is presented in the book "Energy from the Earth. 2015. Hirschberg, Wiemer, Burgherr (eds.) (see field "Data Generator and Publication").

## Included activities start
Input of energy and water for well stimulation.

## Included activities end
Stimulated well.

## Geography
Represents installation of a deep geothermal power plant in Switzerland. Used as first approximation for GLO. Uncertainties adjusted accordingly.

## Technology
Information on chemicals used during stimulation were scarce, so that the process is modelled with the use of water and energy only.

## Reference product
- stimulation, deep well: 1 m3; By-product classification allocatable product; CPC 8621: Support services to mining
  production volume 1.6148e14 m3
  properties: carbon allocation 0 kg, carbon content 0, price 9.77 EUR2005

## Inputs from technosphere
- electricity, high voltage: 70.3611, 1.58613, 5.9269, 4.03258, 0.317041, 8.58055, 0.316986, 8.87875 kWh (8 suppliers, which the file names only by identifier); sum of these 100 kWh; lognormal variance with pedigree 0.1, pedigree (2,2,5,5,2)

## Inputs from nature
- Water, river [natural resource, in water]: 1 m3

## Emissions to nature
- Water [water, ground-]: 1 m3; lognormal variance with pedigree 0.1127, pedigree (3,3,5,3,3)

## Sampling procedure
Literature and various contributors

## Extrapolations
Extrapolated from CH conditions.
