# treatment of bagasse, from sugarcane, in heat and power co-generation unit, 6400kW thermal

Dataset: EcoSpold 2, unit process
Geography: RoW
Time period: 2000-01-01 to 2022-12-31
Technology level: current
Classification: ISIC rev.4 ecoinvent: 3530:Steam and air conditioning supply
Classification: EcoSpold01Categories: waste management/others
Tags: ConvertedDataset; with true value
Scenario: Business-as-Usual
System model: Substitution, consequential, long-term
Generated by: Sofia Parada Tur
Published in: Bauer, C. 2007
Database: ecoinvent
isCopyrightProtected: true
accessRestrictedTo: 1

## General comment
Treatment of bagasse, from sugarcane by combustion in a heat and power cogeneration unit. Emission factors have been used from dataset "heat and power co-generation, wood chips, 6400kW thermal" . Emissions of CO2 and CO are based on carbon content of bagasse. Electricity and heat generation are based on lower heating value of bagasse and efficiency of the cogen unit.
The production volume of this activity is the sum of the corresonding regional activities (in Brazil and Colombia) as no Rest of the World dataset was deemed necessary for this activity.
[Dataset to be replaced by 'treatment of bagasse, from sugarcane, in heat and power co-generation unit, 6400kW thermal, BR-Mid-western grid, 2014 - 2017']

## Included activities start
From reception of bagasse at the cogeneration plant

## Included activities end
This module describes the combustion of bagasse, from sugarcane. Included are the infrastructure, the bagasse input, the emissions to air and the disposal of the ashes. Also included are substances needed for operation: lubricating oil, ammonia, organic chemicals, sodium chloride, chlorine and decarbonized water.

## Geography
based on geography of dataset for cane sugar production with ethanol by-product, that also includes burning of bagasse

## Technology
based on dataset wood chips, burned in cogen 6400 kWh

## Parameters
- fraction, cooling water, cooling pond system, to air: 0.032 dimensionless; name fraction_CW_CP_to_air; lognormal variance with pedigree 0.0413, pedigree (2,3,1,3,1)
  Calculated based on literature value (Scown, C.D., 2011, Water Footprint of U.S. Transportation Fuels and supplying information of the article) (Vionnet, S., Quantis Water Database - Technical Report, 2012).
- fraction, cooling water, once-through system, to air: 0.004 dimensionless; name fraction_CW_OT_to_air; lognormal variance with pedigree 0.0413, pedigree (2,3,1,3,1)
  (same comment as for fraction, cooling water, cooling pond system, to air)
- fraction, cooling water, recirculating system, to air: 0.771 dimensionless; name fraction_CW_R_to_air; lognormal variance with pedigree 0.0413, pedigree (2,3,1,3,1)
  (same comment as for fraction, cooling water, cooling pond system, to air)
- fraction, cooling water, to air: 0.3875 dimensionless; name fraction_CW_to_air; = (0.5*fraction_CW_OT_to_air)+(0.5*fraction_CW_R_to_air); lognormal variance with pedigree 0.092025, pedigree (4,4,3,2,4)
  Calculated value based on literature value (see comments of the other parametres present in this dataset) and expert opinion. In the case when no industry/literature data are available about the type of cooling or directly fraction, cooling water, to air specific for the process a default assumption is applied. It is assumed that the once-through cooling system is used in 50% of all cases and recirculating system is used in another 50% of all cases.
- fraction, water, decarbonised, to air: 0.3875 dimensionless; name fraction_WDC_to_air; = fraction_CW_to_air; lognormal variance with pedigree 0.092025, pedigree (4,4,3,2,4)
  Calculated value. See comments in the other parametres present in this dataset. Decarbonised water is considered to be always used as cooling water, thus cooling water fractions to air are applied to all carbonised water input flows to calculate the amount of water consumed in the processes.

## Reference product
- bagasse, from sugarcane: -1 kg; By-product classification allocatable product; CPC 39141: Bagasse
  properties: carbon allocation 0.348641 kg, carbon content 0.443, carbon content, fossil 0, carbon content, non-fossil 0.443, dry mass 0.787 kg, heating value, net 15.4 MJ, price 0.01 EUR2005, water content 0.270648, water in wet mass 0.213 kg, wet mass 1 kg

## Inputs from technosphere
- chemical, organic: 6.98398e-5 kg; lognormal variance with pedigree 0.0326, pedigree (2,4,5,5,3)
  properties: carbon content, fossil 0.628, dry mass 1 kg, heating value, net 19.03 MJ, wet mass 1 kg
- chlorine, liquid: 3.3199e-6, 6.70941e-7 kg (2 suppliers, which the file names only by identifier); sum of these 3.99084e-6 kg; lognormal variance with pedigree 0.0322, pedigree (4,4,5,5,1)
  properties: dry mass 1 kg, wet mass 1 kg
- electricity, high voltage: -0.000775782, -0.000352495, -0.000155587, -8.1425e-5, -0.000515961, -0.00101873, -0.000182098, -0.000275655, -0.102462, -0.000200057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 kWh (68 suppliers, which the file names only by identifier); sum of these -0.269329 kWh; lognormal variance with pedigree 0.0008, pedigree (1,1,2,1,1)
  properties: exergy 3.6 MJ, price 0.0977 EUR2005
- heat and power co-generation unit, 6400kW thermal, building: 2.93246e-9 unit; lognormal variance with pedigree 0.3322, pedigree (4,4,5,5,1)
- heat and power co-generation unit, 6400kW thermal, common components for heat+electricity: 1.17298e-8 unit; lognormal variance with pedigree 0.3322, pedigree (4,4,5,5,1)
- heat and power co-generation unit, 6400kW thermal, components for electricity only: 1.17298e-8 unit; lognormal variance with pedigree 0.3322, pedigree (4,4,5,5,1)
- heat, district or industrial, other than natural gas: -9.33225 MJ; lognormal variance with pedigree 0.0666, pedigree (4,5,5,5,3)
  properties: exergy 0.169678 MJ, heating value, net 1 MJ, price 0.0106 EUR2005
- municipal solid waste: -3.67875e-5, -3.05585e-6, -5.20156e-8, -1.31066e-8 kg (4 suppliers, which the file names only by identifier); sum of these -3.99084e-5 kg; lognormal variance with pedigree 0.0322, pedigree (4,4,2,5,1)
  properties: carbon content, fossil 0.171549, carbon content, non-fossil 0.261655, dry mass 0.771 kg, heating value, net 11.74 MJ, water content 0.297017, wet mass 1 kg
- sodium chloride, powder: 4.98855e-5 kg; lognormal variance with pedigree 0.0322, pedigree (4,4,5,5,1)
  properties: dry mass 1 kg, wet mass 1 kg
- waste mineral oil: -2.7119e-7, -2.86827e-5, -1.09545e-5 kg (3 suppliers, which the file names only by identifier); sum of these -3.99084e-5 kg; lognormal variance with pedigree 0.0322, pedigree (4,4,2,5,1)
  properties: carbon content, fossil 0.864444, dry mass 0.9 kg, heating value, net 34.7 MJ, water content 0.111111, wet mass 1 kg
- water, decarbonised: 1.56686e-5, 0.00175336, 0.00326244, 0.000428162, 0.000283822, 0.000434729, 0.000520099, 8.63154e-5, 2.13425e-5, 0.00276937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 kg (11 suppliers, which the file names only by identifier); sum of these 0.00957559 kg; lognormal variance with pedigree 0.0322, pedigree (4,4,5,5,1)
  properties: wet mass 1 kg
- wood ash mixture, pure: -5.20919e-5, -0.00528382, -0.00253409 kg (3 suppliers, which the file names only by identifier); sum of these -0.00787 kg; lognormal variance with pedigree 0.0666, pedigree (4,5,5,5,3)
  properties: carbon content, non-fossil 0.012, dry mass 1 kg, wet mass 1 kg

## Emissions to nature
- Acetaldehyde [air, urban air close to ground]: 8.70202e-7 kg; lognormal variance with pedigree 0.0722, pedigree (4,4,5,5,1)
- Ammonia [air, urban air close to ground]: 2.47244e-5 kg; lognormal variance with pedigree 0.0422, pedigree (4,4,5,5,1)
- Arsenic ion [air, urban air close to ground]: 1.43014e-8 kg; lognormal variance with pedigree 0.6822, pedigree (4,4,5,5,1)
- Benzene [air, urban air close to ground]: 1.29682e-5 kg; lognormal variance with pedigree 0.0722, pedigree (4,4,5,5,1)
- Benzene, ethyl- [air, urban air close to ground]: 4.27829e-7 kg; lognormal variance with pedigree 0.0722, pedigree (4,4,5,5,1)
- Benzene, hexachloro- [air, urban air close to ground]: 1.02655e-13 kg; lognormal variance with pedigree 0.3322, pedigree (4,4,5,5,1)
- Benzo(a)pyrene [air, urban air close to ground]: 7.12644e-9 kg; lognormal variance with pedigree 0.3322, pedigree (4,4,5,5,1)
- Bromine [air, urban air close to ground]: 8.55658e-7 kg; lognormal variance with pedigree 0.6822, pedigree (4,4,5,5,1)
- Cadmium II [air, urban air close to ground]: 9.98672e-9 kg; lognormal variance with pedigree 0.6822, pedigree (4,4,5,5,1)
- Calcium [air, urban air close to ground]: 8.33842e-5 kg; lognormal variance with pedigree 0.6822, pedigree (4,4,5,5,1)
- Carbon dioxide, non-fossil [air, urban air close to ground]: 1.27821 kg; lognormal variance with pedigree 0.002, pedigree (1,1,5,5,1)
- Carbon monoxide, non-fossil [air, urban air close to ground]: 6.53257e-5 kg; lognormal variance with pedigree 0.6822, pedigree (4,4,5,5,1)
- Chlorine [air, urban air close to ground]: 2.5694e-6 kg; lognormal variance with pedigree 0.0722, pedigree (4,4,5,5,1)
- Chromium III [air, urban air close to ground]: 5.64783e-8 kg; lognormal variance with pedigree 0.6822, pedigree (4,4,5,5,1)
- Chromium VI [air, urban air close to ground]: 5.70843e-10 kg; lognormal variance with pedigree 0.6822, pedigree (4,4,5,5,1)
- Copper ion [air, urban air close to ground]: 3.13903e-7 kg; lognormal variance with pedigree 0.6822, pedigree (4,4,5,5,1)
- Dinitrogen monoxide [air, urban air close to ground]: 3.28447e-5 kg; lognormal variance with pedigree 0.0722, pedigree (4,4,5,5,1)
- Dioxins, measured as 2,3,7,8-tetrachlorodibenzo-p-dioxin [air, urban air close to ground]: 4.42373e-13 kg; lognormal variance with pedigree 0.3322, pedigree (4,4,5,5,1)
- Fluorine [air, urban air close to ground]: 7.12644e-7 kg; lognormal variance with pedigree 0.0722, pedigree (4,4,5,5,1)
- Formaldehyde [air, urban air close to ground]: 1.85433e-6 kg; lognormal variance with pedigree 0.5506, pedigree (2,1,5,1,5)
- Hydrocarbons, aliphatic, alkanes, unspecified [air, urban air close to ground]: 1.29682e-5 kg; lognormal variance with pedigree 0.0722, pedigree (4,4,5,5,1)
- Hydrocarbons, aliphatic, unsaturated [air, urban air close to ground]: 4.42373e-5 kg; lognormal variance with pedigree 0.0722, pedigree (4,4,5,5,1)
- Lead II [air, urban air close to ground]: 3.01783e-7 kg; lognormal variance with pedigree 0.6822, pedigree (4,4,5,5,1)
- Magnesium [air, urban air close to ground]: 5.1388e-6 kg; lognormal variance with pedigree 0.6822, pedigree (4,4,5,5,1)
- Manganese II [air, urban air close to ground]: 5.1388e-6 kg; lognormal variance with pedigree 0.6822, pedigree (4,4,5,5,1)
- Mercury II [air, urban air close to ground]: 4.27829e-9 kg; lognormal variance with pedigree 0.6822, pedigree (4,4,5,5,1)
- Methane, non-fossil [air, urban air close to ground]: 5.70843e-6 kg; lognormal variance with pedigree 0.0722, pedigree (4,4,5,5,1)
- NMVOC, non-methane volatile organic compounds [air, urban air close to ground]: 8.55658e-6 kg; lognormal variance with pedigree 0.0722, pedigree (4,4,5,5,1)
- Nickel II [air, urban air close to ground]: 8.55658e-8 kg; lognormal variance with pedigree 0.6822, pedigree (4,4,5,5,1)
- Nitrogen oxides [air, urban air close to ground]: 0.00138166 kg; lognormal variance with pedigree 0.0722, pedigree (4,4,5,5,1)
- PAH, polycyclic aromatic hydrocarbons [air, urban air close to ground]: 1.58769e-7 kg; lognormal variance with pedigree 0.3322, pedigree (4,4,5,5,1)
- Particulate Matter, < 2.5 um [air, urban air close to ground]: 0.000870202 kg; lognormal variance with pedigree 0.3322, pedigree (4,4,5,5,1)
- Phenol, pentachloro- [air, urban air close to ground]: 1.15502e-10 kg; lognormal variance with pedigree 0.0722, pedigree (4,4,5,5,1)
- Phosphorus [air, urban air close to ground]: 4.27829e-6 kg; lognormal variance with pedigree 0.0722, pedigree (4,4,5,5,1)
- Potassium I [air, urban air close to ground]: 0.000333294 kg; lognormal variance with pedigree 0.6822, pedigree (4,4,5,5,1)
- Sodium [air, urban air close to ground]: 1.85433e-5 kg; lognormal variance with pedigree 0.6822, pedigree (4,4,5,5,1)
- Sulfur dioxide [air, urban air close to ground]: 3.01783e-5 kg; lognormal variance with pedigree 0.0322, pedigree (4,4,5,5,1)
- Toluene [air, urban air close to ground]: 4.27829e-6 kg; lognormal variance with pedigree 0.0722, pedigree (4,4,5,5,1)
- Water [air, unspecified]: 3.71054e-6 m3; lognormal variance with pedigree 0.092025, pedigree (4,4,5,2,4)
- Zinc II [air, urban air close to ground]: 4.27829e-6 kg; lognormal variance with pedigree 0.6822, pedigree (4,4,5,5,1)
- m-Xylene [air, urban air close to ground]: 1.70889e-6 kg; lognormal variance with pedigree 0.0722, pedigree (4,4,5,5,1)
- Water [water, unspecified]: 5.86505e-6 m3; lognormal variance with pedigree 0.092025, pedigree (4,4,5,2,4)

## Extrapolations
The original dataset is valid is based on measures from one cogen unit in Switzerland and has been extrapolated to a global dataset

## Review by Christian Bauer 2012-02-29
passed
