# tap water production, direct filtration treatment

Dataset: EcoSpold 2, unit process
Geography: CO
Time period: 2012-01-01 to 2022-12-31
Technology level: current
Classification: EcoSpold01Categories: water supply/production
Classification: ISIC rev.4 ecoinvent: 3600:Water collection, treatment and supply
Synonyms: potable water
Scenario: Business-as-Usual
System model: Substitution, consequential, long-term
Generated by: Laura Rubio
Published in: Gmünder S. 2017
Database: ecoinvent
isCopyrightProtected: true
accessRestrictedTo: 1

## General comment
This dataset is created as a child of the global dataset with edited production volume for this geography.
This dataset represents production of 1 kg of tap water under pressure at facility gate, ready for distribution in network. It represents average operation of direct filtration treatment for production of tap water. Direct filtration treatment includes sand filtration and disinfection. Inventory was constructed from reported chemicals, energy inputs and wastes from 2 distinct direct filtration plants located in Québec covering nearly 100% of total production of tap water from this technology.

## Included activities start
From the intake pumping of raw surface water into the water treatment plant.

## Included activities end
This dataset ends with the production of tap water, at facility gate, under pressure. It includes energy for intake pumping, treatment system, lighting and heating of the building as well as the energy of the pump pressurizing water to the beginning of the network. It includes all chemicals and material added to the water during treatment and, when needed, ultraviolent lamps for replacement. It excludes energy for pumping stations and water losses within the network which is included in the tap water market. Emissions to the environment occurring during the treatment and during the distribution were not considered as they are assumed negligible. Main substance in water that would be released in the environment are assumed to be considered in wastewater processes.

## Geography
Extrapolated from data from two plants in Quebec (Canada).The uncertainty was adjusted accordingly.

## Time period
The time period is set from 2012 to the year 2017 as it is a considering period in which conventional treatment plants have not passed through drastic technological changes.

## Parameters
- unit conversion, days in a year: 365.25 d/year; name days_per_year; lognormal variance with pedigree 0.0006, pedigree (1,1,1,1,1)
  Conversion factor.

## Reference product
- tap water: 1 kg; By-product classification allocatable product; CPC 18000: Natural water
  production volume 2.2237e10 kg
  properties: carbon allocation 6.08566e-7 kg, carbon content 0.0017899, carbon content, fossil 0.0017899, carbon content, non-fossil 0, dry mass 0.00034 kg, price 0.000397 EUR2005, water content 2940.18, water in wet mass 0.99966 kg, wet mass 1 kg

## Inputs from technosphere
- chlorine, liquid: 3.20892e-6 kg; lognormal variance with pedigree 0.0033, pedigree (2,2,3,5,1)
  properties: dry mass 1 kg, wet mass 1 kg
- electricity, medium voltage: 0.000286 kWh; lognormal variance with pedigree 0.0033, pedigree (2,2,3,5,1)
- heat, district or industrial, natural gas: 1.16044e-6 MJ; lognormal variance with pedigree 0.002, pedigree (1,1,3,5,1)
  properties: Corresponding fuel use 1.11 MJ, fuel input in physical units, m3 2.88e-8 m3, heating value, net 1 MJ
- wastewater, unpolluted: -1.28461e-5 m3; lognormal variance with pedigree 0.0033, pedigree (2,2,1,5,1)
  properties: carbon content, fossil 0.00178991, carbon content, non-fossil 0.00178991, dry mass 0.337476 kg, water content 2962.17, wet mass 1000 kg
- water pump operation, diesel: 6.6407e-6 MJ; lognormal variance with pedigree 0.002, pedigree (1,1,3,5,1)
  properties: density 0.84 kg/l, fuel input in physical units, L 1.83e-7 l, heating value, net 43.2 MJ, price 0.07 EUR2005
- water works, capacity 1.1E10l/year: 1.52103e-12 unit; lognormal variance with pedigree 0.002, pedigree (1,1,3,5,1)
  properties: lifetime 60 year, plant average daily flow rate 30000 m3/d

## Inputs from nature
- Water, river [natural resource, in water]: 0.00101285 m3; lognormal variance with pedigree 0.0033, pedigree (2,2,3,5,1)

## Sampling procedure
Based on data collected from two direct filtration treatment plants in Quebec (Canada). See corresponding Quebec dataset for more information. Note that percent representativeness is not supplied because technology-specific global production volumes is too uncertain. Should this information become available, the representativeness can be calculated by dividing the sum of the water treated by the Quebec plants that served as a basis for the Global dataset by the technology-specific global production volume. (5.73E11 kg/a)

## Extrapolations
From two direct filtration tap water production facilities in Quebec (Canada) to Colombian average of same technology. Colombian production volumen data was used for regionalizing the dataset, the remaining exchanges were copied from the global dataset. Direct filtration treatment accounts for 1.0% of the total produced tap water in Colombia.The uncertainty has been changed accordingly.

## Review by Philippe Loubet 2017-11-23
The overall quality of this dataset is acceptable.
In the future it would be desirable to update this dataset with Columbian data.
