# transmission network construction, electricity, high voltage direct current aerial line

Dataset: EcoSpold 2, unit process
Geography: RER
Time period: 1998-01-01 to 2022-12-31
Technology level: current
Classification: EcoSpold01Categories: electricity/distribution
Classification: ISIC rev.4 ecoinvent: 4220:Construction of utility projects
Synonyms: HVDC aerial line; high voltage direct current overhead line; HVDC overhead line
Scenario: Business-as-Usual
System model: Substitution, consequential, long-term
Generated by: Heidi Hottenroth
Published in: Jorge, R. 2012
Database: ecoinvent
isCopyrightProtected: true
accessRestrictedTo: 1

## General comment
This dataset represents the construction and decommissioning of 1 km transmission network high voltage direct current aerial line. The service life of the network was assumed to be 40 years. For this period also maintenance is considered as a service. Default value for power losses at 50 % load sum up to 2.14E8 kWh/km. Different from the literature source recycling was modelled according to the cut-off approach.
The inventory was modelled according to Jorge, R., Hawkins, T.R., Hertwich, E.G (2012): Life cycle assessment of electricity transmission and distribution - part 1: power lines and cables. Int J Life Cycle Assess 17: 9-15, supplementary material

## Included activities start
The activity starts with cable and mast production according to material composition (energy requirements for cable and mast production not included). Maintenance is included as a service. Substations are not included.

## Included activities end
This activity ends with the decommissioning of transition network according to material composition

## Geography
The scope of the underlying literature source is Europe

## Technology
The voltage level is assumed to be 250 or 350 kV, respectively.

## Time period
Time frame of the underlying literature sources

## Parameters
- lifetime: 40 year

## Reference product
- transmission network, electricity, high voltage direct current aerial line: 1 km; By-product classification allocatable product; CPC 53242: Long-distance communication and power lines (cables)
  production volume 639 km
  properties: carbon allocation 0 kg, carbon content 0, lifetime 40 year, price 4 EUR2005

## Inputs from technosphere
- aluminium scrap, post-consumer: -7414.2 kg; lognormal variance with pedigree 0.0133, pedigree (3,3,3,3,3)
  properties: dry mass 1 kg, price 0.685 EUR2005, wet mass 1 kg
- aluminium, wrought alloy: 8238 kg; lognormal variance with pedigree 0.0032, pedigree (3,3,4,1,1)
  properties: dry mass 1 kg, wet mass 1 kg
- cast iron: 10500 kg; lognormal variance with pedigree 0.0032, pedigree (3,3,4,1,1)
  properties: carbon content, fossil 0.04, dry mass 1 kg, wet mass 1 kg
- cement, unspecified: 63.511, 1.48902 kg (2 suppliers, which the file names only by identifier); sum of these 65 kg; lognormal variance with pedigree 0.0032, pedigree (3,3,4,1,1)
  properties: dry mass 1 kg, wet mass 1 kg
- concrete, normal strength: 54.2106, 29.7894 m3 (2 suppliers, which the file names only by identifier); sum of these 84 m3; lognormal variance with pedigree 0.0032, pedigree (3,3,4,1,1)
  properties: dry mass 2190 kg, water content 0.086758, wet mass 2380 kg
- diesel, burned in agricultural machinery: 37400 MJ; lognormal variance with pedigree 0.0032, pedigree (3,3,4,1,1)
- glass tube, borosilicate: 1380 kg; lognormal variance with pedigree 0.0032, pedigree (3,3,4,1,1)
  properties: dry mass 1 kg, wet mass 1 kg
- inert waste, for final disposal: -65 kg; lognormal variance with pedigree 0.0133, pedigree (3,3,3,3,3)
  properties: dry mass 0.995 kg, water content 0.00502513, wet mass 1 kg
- iron scrap, unsorted: -28587.6 kg; lognormal variance with pedigree 0.0133, pedigree (3,3,3,3,3)
  properties: carbon content, fossil 0.0152002, dry mass 1 kg, price 0.149 EUR2005, wet mass 1 kg
- lubricating oil: 131 kg; lognormal variance with pedigree 0.0032, pedigree (3,3,4,1,1)
  properties: carbon content, fossil 0.75, dry mass 1 kg, wet mass 1 kg
- maintenance, transmission network, electricity, high voltage direct current aerial line: 40 km*year; lognormal variance with pedigree 0.0093, pedigree (4,3,4,3,1)
- scrap steel: -3172.38, -4.01929 kg (2 suppliers, which the file names only by identifier); sum of these -3176.4 kg; lognormal variance with pedigree 0.0133, pedigree (3,3,3,3,3)
  properties: dry mass 1 kg, wet mass 1 kg
- steel, low-alloyed: 3864 kg; lognormal variance with pedigree 0.0032, pedigree (3,3,4,1,1)
  properties: carbon content, fossil 0.005, dry mass 1 kg, wet mass 1 kg
- steel, unalloyed: 17400 kg; lognormal variance with pedigree 0.0032, pedigree (3,3,4,1,1)
  properties: carbon content, fossil 0.0025, dry mass 1 kg, wet mass 1 kg
- waste aluminium: -823.8 kg; lognormal variance with pedigree 0.0133, pedigree (3,3,3,3,3)
  properties: dry mass 1 kg, wet mass 1 kg
- waste concrete: -199216, -704.349 kg (2 suppliers, which the file names only by identifier); sum of these -199920 kg; lognormal variance with pedigree 0.0133, pedigree (3,3,3,3,3)
  properties: dry mass 1 kg, water content 0.08679, wet mass 1.08679 kg
- waste glass: -1380 kg; lognormal variance with pedigree 0.0133, pedigree (3,3,3,3,3)
  properties: dry mass 1 kg, wet mass 1 kg
- waste mineral oil: -3.16469, -127.835 kg (2 suppliers, which the file names only by identifier); sum of these -131 kg; lognormal variance with pedigree 0.0133, pedigree (3,3,3,3,3)
  properties: carbon content, fossil 0.864444, dry mass 0.9 kg, water content 0.111111, wet mass 1 kg
- zinc: 520 kg; lognormal variance with pedigree 0.0032, pedigree (3,3,4,1,1)
  properties: dry mass 1 kg, wet mass 1 kg
- zinc scrap, post-consumer: -520 kg; lognormal variance with pedigree 0.0133, pedigree (3,3,3,3,3)
  properties: dry mass 1 kg, price 0.55 EUR2005, wet mass 1 kg, zinc content 1

## Inputs from nature
- Occupation, industrial area [natural resource, land]: 1676 m2*year; lognormal variance with pedigree 0.25, pedigree (5,5,5,5,5)
- Transformation, from annual crop [natural resource, land]: 23.3 m2; lognormal variance with pedigree 0.33, pedigree (5,5,5,5,5)
- Transformation, from forest, unspecified [natural resource, land]: 18.6 m2; lognormal variance with pedigree 0.33, pedigree (5,5,5,5,5)
- Transformation, to industrial area [natural resource, land]: 41.9 m2; lognormal variance with pedigree 0.33, pedigree (5,5,5,5,5)

## Sampling procedure
LCI data on resource use and emissions for production of materials, installation, maintenance, and end of life were provided by the Danish utility company Energinet.dk. No data referring to line manufacturing (assembly of components) were available, and hence this process was not included.
