# cyclohexane production

Dataset: EcoSpold 2, unit process
Geography: RoW
Time period: 1975-01-01 to 2022-12-31
Technology level: current
Classification: ISIC rev.4 ecoinvent: 2011:Manufacture of basic chemicals
Synonyms: Hexamethylene; Hexanaphthene; Cyclohexan; Cykloheksan; Hexahydrobenzene
Scenario: Business-as-Usual
System model: Substitution, consequential, long-term
Share of production covered: 10 %
Generated by: Jürgen Sutter
Published in: Althaus H.-J. 2007
Database: ecoinvent
isCopyrightProtected: true
accessRestrictedTo: 1

## General comment
This dataset represents the production of 1 kg of cyclohexane by hydrogenation of benzene. Cyclohexane (C6H12) is a clear liquid with a pungent petroleum-like odor. It is essentially insoluble in water but miscible in most organic liquids, and is noncorrosive, easily flammable, and considered to be much less toxic than benzene. Over 98 % of the cyclohexane produced is used to make nylon intermediates: adipic acid, caprolactam, and hexamethylenediamine, with the first two consuming ca. 95 % of the cyclohexane used in nylon manufacture. Minor miscellaneous uses, such as solvents and polymer reaction diluents, consume the remainder of the cyclohexane produced (Campbell 2011).
In this dataset, the raw materials, auxiliaries and energy consumption are modelled with data from literature sources. The emissions are estimated and the infrastructure is included with a default value.
References:
Sutter, J. (2007) Life Cycle Inventories of Petrochemical Solvents. ecoinvent report No. 22. Swiss Centre for Life Cycle Inventories, Dübendorf, 2007.
Campbell, M. L. 2011. Cyclohexane. Ullmann's Encyclopedia of Industrial Chemistry.

## Included activities start
From the reception of benzene at the factory gate.

## Included activities end
This activity ends with the production of cyclohexane. The dataset includes the consumption of input materials, the energy uses, infrastructure use and emissions.

## Geography
The inventory is modelled for Europe but is assumed to be representative of the global production.

## Technology
Over 90 % of all cyclohexane is produced commercially by hydrogenation of benzene. A small amount is produced by superfractionation of the naphtha fraction from crude oil. Naturally occurring cyclohexane can be supplemented by fractionating methylcyclopentane from naphtha and isomerizing it to cyclohexane.
Hydrogenation of benzene:
Benzene can be hydrogenated catalytically to cyclohexane in either the liquid or the vapor phase in the presence of hydrogen. Several cyclohexane processes, which use nickel, platinum, or palladium as the catalyst, have been developed. Usually, the catalyst is supported, e.g., on alumina, but at least one commercial process utilizes Raney nickel.
Hydrogenation proceeds readily and is highly exothermic (Δ H500K = – 216.37 kJ/mol). From an equilibrium standpoint, the reaction temperature should not exceed 300 °C. Above this, the equilibrium begins to shift in favor of benzene so that high-purity cyclohexane cannot be produced. As a result of these thermodynamic considerations, temperature control of the reaction is critical to obtaining essentially complete conversion of benzene to cyclohexane.
Temperature control requires economic and efficient heat removal. This has been addressed in a number of ways by commercial processes. The earlier vapor-phase processes used multistage reactors with recycle of cyclohexane as a diluent to provide a heat sink, staged injection of benzene feed between reactors, and interstage steam generators to absorb the exothermic heat of hydrogenation. In the 1970s processes have been developed that use only one reactor or a combination of a liquid-and a vaporphase reactor. The objectives of the later processes were to reduce capital cost and improve energy utilization. However, all of the commercial processes have comparably low capital cost and good energy efficiency.
In the vapor-phase process with multistage reactors in series, the benzene feed is divided and fed to each of the first two reactors. Recycled cyclohexane is introduced to the first reactor along with hydrogen. The recycled cyclohexane enables higher conversion in the reactors by absorbing part of the heat of hydrogenation. Steam generators between the reactors remove the heat of hydrogenation. The outlet temperature of the last reactor is controlled to achieve essentially 100 % conversion of benzene to cyclohexane. The effluent from the last reactor is cooled, and the vapor and liquid are separated. Part of the hydrogen-rich vapor is recycled to the first reactor, and the rest is purged to fuel gas or hydrogen recovery facilities. The liquid from the separator goes to a stabilizer where the overhead gas is sent to fuel gas; the remaining material is cyclohexane product, part of which is recycled to the first reactor.
In the process with liquid- and vapor-phase reactors, benzene and hydrogen are fed to the liquid-phase reactor, which contains a slurry of finely divided Raney nickel. Temperature is maintained at 180 – 190 °C by pumping the slurry through a steam generator and by vaporization in the reactor. Roughly 95 % of the benzene is converted in this reactor. The vapor is fed to a fixed-bed reactor where the conversion of benzene is completed. The effluent from the fixed-bed reactor is processed as described previously for the vapor-phase process.
Benzene hydrogenation is done typically at 20 – 30 MPa. The maximum reactor temperature is limited to ca. 300 °C so that a typical specification of < 500 mg/kg benzene and < 200 mg/kg methylcyclopentane in the product can be achieved. This is necessary because of the thermodynamic equilibrium between cyclohexane – benzene and cyclohexane – methylcyclopentane. Actually, equilibrium strongly favors methylcyclopentane, but the isomerization reaction is slow enough with the catalysts employed to avoid a problem if the temperature is controlled.
The hydrogen content of the makeup hydrogen has no effect on product purity but it does determine the makeup, recycle, and purge gas rates. Streams with as low as 65 vol % hydrogen can be used.
Carbon monoxide and sulfur compounds are catalyst deactivators. Both can be present in the hydrogen from catalytic naphtha reformers or ethylene units, which are typical sources of makeup hydrogen. Therefore, the hydrogen-containing stream is usually passed through a methanator to convert carbon monoxide to methane and water. Prior to methanation, hydrogen-containing gas can be scrubbed with caustic to remove sulfur compounds. Commercial benzene contains less than 1 mg/kg sulfur. In some cases, the recycle gas is also scrubbed with caustic to prevent buildup of hydrogen sulfide from the small amount of sulfur in the benzene. With properly treated hydrogen and specification benzene, a catalyst life in excess of three years can be achieved easily in fixed-bed reactors that use noble-metal catalysts supported on a base. The catalyst in the process that uses Raney nickel in suspension is reported to have a typical life of about six months before it must be replaced.
Reference:
Campbell, M. L. 2011. Cyclohexane. Ullmann's Encyclopedia of Industrial Chemistry.

## Time period
Time of publications.

## Parameters
- fraction, cooling water, cooling pond system, to air: 0.032 dimensionless; name fraction_CW_CP_to_air; lognormal variance with pedigree 0.0413, pedigree (2,3,1,3,1)
  Calculated based on literature value (Scown, C.D., 2011, Water Footprint of U.S. Transportation Fuels and supplying information of the article) (Vionnet, S., Quantis Water Database - Technical Report, 2012).
- fraction, cooling water, once-through system, to air: 0.004 dimensionless; name fraction_CW_OT_to_air; lognormal variance with pedigree 0.0413, pedigree (2,3,1,3,1)
  (same comment as for fraction, cooling water, cooling pond system, to air)
- fraction, cooling water, recirculating system, to air: 0.771 dimensionless; name fraction_CW_R_to_air; lognormal variance with pedigree 0.0413, pedigree (2,3,1,3,1)
  (same comment as for fraction, cooling water, cooling pond system, to air)
- fraction, cooling water, to air: 0.3875 dimensionless; name fraction_CW_to_air; = (0.5*fraction_CW_OT_to_air)+(0.5*fraction_CW_R_to_air); lognormal variance with pedigree 0.092025, pedigree (4,4,3,2,4)
  Calculated value based on literature value (see comments of the other parametres present in this dataset) and expert opinion. In the case when no industry/literature data are available about the type of cooling or directly fraction, cooling water, to air specific for the process a default assumption is applied. It is assumed that the once-through cooling system is used in 50% of all cases and recirculating system is used in another 50% of all cases.
- fraction, process water, to air: 0.205 dimensionless; name fraction_PW_to_air; lognormal variance with pedigree 0.092025, pedigree (4,4,3,2,4)
  Literature value (Statistics Canada, 2007 & Shaffer, K.H., 2008, Consumptive water use in the Great Lakes Basin, USGS) (Vionnet, S., Quantis Water Database - Technical Report, 2012).
- fraction, water, deionised, to air: 0.205 dimensionless; name fraction_WDI_to_air; = fraction_PW_to_air; lognormal variance with pedigree 0.092025, pedigree (4,4,3,2,4)
  Calculated value. See comment in the other parametres present in this dataset. Deionised water is considered to be always used as process water, thus process water fractions to air are applied to all deionised water input flows to calculate the amount of water consumed in the processes.

## Reference product
- cyclohexane: 1 kg; By-product classification allocatable product; CPC 34110: Hydrocarbons and their halogenated, sulphonated, nitrated or nitrosated derivatives
  production volume 4.2126e9 kg
  properties: carbon allocation 0.857143 kg, carbon content 0.857143, carbon content, fossil 0.857143, carbon content, non-fossil 0, dry mass 1 kg, heating value, net 43.22 MJ, price 0.76 EUR2005, water content 0, water in wet mass 0 kg, wet mass 1 kg

## Inputs from technosphere
- aluminium, cast alloy: 9.92e-6 kg; lognormal variance with pedigree 0.0721, pedigree (1,2,5,5,1)
  properties: dry mass 1 kg, wet mass 1 kg
- aluminium, wrought alloy: 2.108e-5 kg; lognormal variance with pedigree 0.0721, pedigree (1,2,5,5,1)
  properties: dry mass 1 kg, wet mass 1 kg
- benzene: 0.937 kg; lognormal variance with pedigree 0.0721, pedigree (1,2,5,5,1)
  properties: carbon content, fossil 0.923077, dry mass 1 kg, heating value, net 42.5 MJ, wet mass 1 kg
- chemical factory, organics: 4e-10 unit; lognormal variance with pedigree 0.3098, pedigree (2,3,5,4,3)
- electricity, medium voltage: 0.0120877, 0.000452262, 0.00574614, 0.0997313, 0.0083742, 0.000448852 kWh (6 suppliers, which the file names only by identifier); sum of these 0.12684 kWh; lognormal variance with pedigree 0.0021, pedigree (1,2,5,5,1)
- heat, district or industrial, natural gas: 0.371022, 2.44516 MJ (2 suppliers, which the file names only by identifier); sum of these 2.81618 MJ; lognormal variance with pedigree 0.0021, pedigree (1,2,5,5,1)
  properties: heating value, net 1 MJ
- heat, district or industrial, other than natural gas: 0.00273999, 1.56913 MJ (2 suppliers, which the file names only by identifier); sum of these 1.57187 MJ; lognormal variance with pedigree 0.0021, pedigree (1,2,5,5,1)
  properties: heating value, net 1 MJ
- hydrogen, liquid: 0.07 kg; lognormal variance with pedigree 0.0721, pedigree (1,2,5,5,1)
  properties: dry mass 1 kg, heating value, net 120.21 MJ, wet mass 1 kg
- nickel, class 1: 3.1e-5 kg; lognormal variance with pedigree 0.0721, pedigree (1,2,5,5,1)
  properties: dry mass 1 kg, wet mass 1 kg
- water, deionised: 0.95 kg; lognormal variance with pedigree 0.002, pedigree (1,1,5,5,1)
  properties: wet mass 1 kg

## Inputs from nature
- Water, cooling, unspecified natural origin [natural resource, in water]: 0.008 m3; lognormal variance with pedigree 0.0027, pedigree (2,2,5,5,1)

## Emissions to nature
- Benzene [air, urban air close to ground]: 0.001874 kg; lognormal variance with pedigree 0.188, pedigree (4,5,5,5,5)
- Carbon dioxide, fossil [air, urban air close to ground]: 0.023 kg; lognormal variance with pedigree 0.1786, pedigree (4,5,5,5,5)
- Hydrogen [air, urban air close to ground]: 0.0007 kg; lognormal variance with pedigree 0.188, pedigree (4,5,5,5,5)
- Water [air, unspecified]: 0.00329475 m3; lognormal variance with pedigree 0.0427, pedigree (2,2,5,5,1)
- BOD5, Biological Oxygen Demand [water, unspecified]: 0.00221098 kg; lognormal variance with pedigree 0.218, pedigree (4,5,5,5,5)
- Benzene [water, surface water]: 0.0007496 kg; lognormal variance with pedigree 0.448, pedigree (4,5,5,5,5)
- COD, Chemical Oxygen Demand [water, unspecified]: 0.00221098 kg; lognormal variance with pedigree 0.218, pedigree (4,5,5,5,5)
- DOC, Dissolved Organic Carbon [water, unspecified]: 0.000690932 kg; lognormal variance with pedigree 0.218, pedigree (4,5,5,5,5)
- TOC, Total Organic Carbon [water, unspecified]: 0.000690932 kg; lognormal variance with pedigree 0.218, pedigree (4,5,5,5,5)
- Water [water, unspecified]: 0.00565525 m3; lognormal variance with pedigree 0.0427, pedigree (2,2,5,5,1)

## Sampling procedure
Literature data

## Extrapolations
This dataset has been copied from an original dataset covering the geography RER. The uncertainty has been adjusted accordingly.

## Review by Gregor Wernet 2017-08-04
This dataset was additionally reviewed in a separate review process by Eric Johnson of Atlantic Consulting as well as Emilia Moreno Ruiz and Gregor Wernet of ecoinvent.
