# stockpiling of anode slime from electrorefining of copper, anode

Dataset: EcoSpold 2, unit process
Geography: US
Time period: 2005-01-01 to 2022-12-31
Technology level: current
Classification: EcoSpold01Categories: metals/extraction
Classification: ISIC rev.4 ecoinvent: 2420:Manufacture of basic precious and other non-ferrous metals
Scenario: Business-as-Usual
System model: Substitution, consequential, long-term
Generated by: Emilia Moreno Ruiz
Database: ecoinvent
isCopyrightProtected: true
accessRestrictedTo: 1

## General comment
Stockpiling is a way of assuring provision and control over supplies, and is systematically applied with some commodities by several countries.
The United States has a known and well documented national stockpiling service. Tellurium can be found as one of the commodities that is stockpiled, as it is considered of strategic importance.
This dataset describes the stockpiling of "anode slime, silver and tellurium containing, from refining of primary copper". Only the infrastructure for the storage tank is included by using as a proxy a storage tank for liquid organic chemicals. No losses are taken into account. The stockpiling is considered to happen in the geographical sourroundings of the mine producing the concentrate.
Sources:
-US Department of defense, 2013, Strategic and Critical Materials - Report on Stockpile Requirements.
-Reconfiguration of the National Defense Stockpile Report to Congress, April 2009.

## Included activities start
The activity starts with the arrival of anode slime to the storage tank.

## Included activities end
The activity ends with the provision of the service of stockpiling the anode slime.

## Technology
The storage does not consider infrastructre nor process losses.

## Reference product
- anode slime from electrorefining of copper, anode: 1 kg; By-product classification allocatable product; CPC 4: Metal products, machinery and equipment
  production volume 1 kg
  properties: carbon allocation 0 kg, carbon content 0, carbon content, fossil 0, carbon content, non-fossil 0, dry mass 1 kg, price 0 EUR2005, water content 0, water in wet mass 0 kg, wet mass 1 kg

## Inputs from technosphere
- liquid storage tank, chemicals, organics: -3.33333e-9 unit; lognormal variance with pedigree 0.1726, pedigree (3,5,5,5,5)
- stockpiling of anode slime from electrorefining of copper, anode: 1 kg
  properties: price 4.06 EUR2005

## Extrapolations
this stockpiling of anode slime is only considering infrastructure.
