# metazachlor production

Dataset: EcoSpold 2, unit process
Geography: GLO
Time period: 2021-01-01 to 2022-12-31
Technology level: current
Classification: ISIC rev.4 ecoinvent: 2011:Manufacture of basic chemicals
Synonyms: Butisan; Fuego
Scenario: Business-as-Usual
System model: Substitution, consequential, long-term
Generated by: Daria Dellenbach
Database: ecoinvent
isCopyrightProtected: true
accessRestrictedTo: 1

## General comment
This dataset represents the production of 1 kg of metazachlor. Emissions are estimated. Energy consumptions, infrastructure and transports are calculated with standard values. A yield of 95% per chemical step was assumed.
Metazachlor is an organic substance with the CAS no.: 067129-08-2. It is called '2-chloro-N-(2,6-dimethylphenyl)-N-(pyrazol-1-ylmethyl)acetamide' under IUPAC naming and its molecular formula is: C14H16ClN3O. It is solid under normal conditions of temperature and pressure as a white to yellow solid with no distinct odor. It is modelled as a pure substance. Metazachlor is a herbicide mainly applied against weeds in cabbage, tabacco and potatoes. There are no publicly available information about the consumption of this substance on industrial sites.
Reference(s):
Unger T., (1996). Pesticide Synthesis Handbook, Noyes Publication.
Appleby A.P., Muller F., Carpy, S., (2011): Weed Control, in Ullmanns Encyclopedia of Industrial Chemistry, Weinheim, Wiley-VCH.Chemiepark GENDORF, Umwelterklärung 2016, https://www.gendorf.de/Nachbarn/Umweltschutz/Industrie%20und%20Nachhaltigkeit
Chemiepark GENDORF, Umwelterklärung 2016, https://www.gendorf.de/Nachbarn/Umweltschutz/Industrie%20und%20Nachhaltigkeit
Chemiepark GENDORF, Umwelterklärung 2017, https://www.gendorf.de/Nachbarn/Umweltschutz/Industrie%20und%20Nachhaltigkeit
Chemiepark GENDORF, Umwelterklärung 2020, https://www.gendorf.de/Nachbarn/Umweltschutz/Industrie%20und%20Nachhaltigkeit
Hischier, R. (2005) Establishing Life Cycle Inventories of Chemicals Based on Differing Data Availability (9 pp). The International Journal of Life Cycle Assessment, Volume 10, Issue 1, pp 59–67. 10.1065/lca2004.10.181.7

## Included activities start
Cradle to gate. The activity starts when the raw materials enter the process.

## Included activities end
Production of metazachlor production including materials, energy uses, infrastructure and emissions.

## Technology
This dataset represents the production of 1 kg of metazachlor.
Metazachlor is produced in five steps from xylene:
C8H10 + HNO3 → C8H9NO2 + H2O
C8H9NO2 + 3H2 → C8H11N + 2 H2O
C8H11N + C2H2Cl2O → C10H12NClO + HCl
C10H12NClO + CH2O + HCl → C11H13NCl2O + H2O
C11H13NCl2O + C3H4N2 → C14H16ClN3O + HCl
Paraformaldehyde (C3H6O3) is produced from formaldehyde:
3 CH2O → C3H6O3
Sodium hydroxide is added to neutralise the formed hydrochloric acid and released to water as sodium, chloride and water.
Reference(s):
Unger T., (1996). Pesticide Synthesis Handbook, Noyes Publication.
Appleby A.P., Muller F., Carpy, S., (2011): Weed Control, in Ullmanns Encyclopedia of Industrial Chemistry, Weinheim, Wiley-VCH.

## Reference product
- metazachlor: 1 kg; By-product classification allocatable product; CPC 34663: Herbicides, anti-sprouting products and plant-growth regulators
  production volume 3.5014e7 kg
  properties: carbon allocation 0.605411 kg, carbon content 0.605411, carbon content, fossil 0.605411, carbon content, non-fossil 0, dry mass 1 kg, price 3.67422 EUR2005, water content 0, water in wet mass 0 kg, wet mass 1 kg

## Inputs from technosphere
- chemical factory, organics: 1.432e-9 unit; lognormal variance with pedigree 0.3492, pedigree (2,5,2,4,4)
- chloroacetyl chloride: 0.430169 kg; lognormal variance with pedigree 0.0098, pedigree (2,5,2,2,2)
  properties: carbon content, fossil 0.212692, dry mass 1 kg, heating value, net 8.59 MJ, wet mass 1 kg
- compressed air, 1000 kPa gauge: 1.15055, 0.468182 m3 (2 suppliers, which the file names only by identifier); sum of these 1.61873 m3; lognormal variance with pedigree 0.0498, pedigree (2,5,2,4,4)
- electricity, medium voltage: 1.42863 kWh; lognormal variance with pedigree 0.0498, pedigree (2,5,2,4,4)
- formaldehyde: 0.0222045, 0.0927313 kg (2 suppliers, which the file names only by identifier); sum of these 0.114936 kg; lognormal variance with pedigree 0.0098, pedigree (2,5,2,1,2)
  properties: carbon content, fossil 0.4, dry mass 1 kg, heating value, net 20.19 MJ, wet mass 1 kg
- heat, district or industrial, natural gas: 6.75367 MJ; lognormal variance with pedigree 0.0498, pedigree (2,5,2,4,4)
  properties: heating value, net 1 MJ
- heat, from steam, in chemical industry: 0.111504, 0.63242 MJ (2 suppliers, which the file names only by identifier); sum of these 0.743924 MJ; lognormal variance with pedigree 0.0498, pedigree (2,5,2,4,4)
  properties: heating value, net 1 MJ
- hydrochloric acid, without water, in 30% solution state: 0.115158, 0.0242584 kg (2 suppliers, which the file names only by identifier); sum of these 0.139416 kg; lognormal variance with pedigree 0.0098, pedigree (2,5,2,1,2)
  properties: dry mass 1 kg, heating value, net 3.32 MJ, wet mass 1 kg
- hydrogen, liquid: 0.00416045, 0.0189896 kg (2 suppliers, which the file names only by identifier); sum of these 0.02315 kg; lognormal variance with pedigree 0.0098, pedigree (2,5,2,2,2)
  properties: dry mass 1 kg, heating value, net 120.21 MJ, wet mass 1 kg
- nitric acid, without water, in 50% solution state: 0.0317376, 0.0192587, 0.00836707, 0.00521208, 0.00771567, 0.00922777, 0.00774434, 0.0250454, 0.0588, 0.0678052 kg (10 suppliers, which the file names only by identifier); sum of these 0.240914 kg; lognormal variance with pedigree 0.0098, pedigree (2,5,2,2,2)
  properties: dry mass 1 kg, wet mass 1 kg
- nitrogen, liquid: 0.0265135, 0.0265135 kg (2 suppliers, which the file names only by identifier); sum of these 0.053027 kg; lognormal variance with pedigree 0.0498, pedigree (2,5,2,4,4)
  properties: dry mass 1 kg, wet mass 1 kg
- pyrazole: 0.259293 kg; lognormal variance with pedigree 0.0098, pedigree (2,5,2,2,2)
  properties: carbon content, fossil 0.529288, dry mass 1 kg, heating value, net 23.16 MJ, wet mass 1 kg
- sodium hydroxide, without water, in 50% solution state: 0.288001 kg; lognormal variance with pedigree 0.0098, pedigree (2,5,2,1,2)
  properties: dry mass 1 kg, heating value, net 3.03 MJ, wet mass 1 kg
- tap water: 0.08055 kg; lognormal variance with pedigree 0.0498, pedigree (2,5,2,4,4)
  properties: carbon content, fossil 0.00178991, dry mass 0.000337476 kg, water content 2962.17, wet mass 1 kg
- wastewater, average: -1.56102e-6, -3.92307e-8, -6.52817e-6, -2.32428e-8 m3 (4 suppliers, which the file names only by identifier); sum of these -8.15166e-6 m3; lognormal variance with pedigree 0.0498, pedigree (2,5,1,4,4)
  properties: carbon content, non-fossil 0.194039, dry mass 0.346837 kg, water content 2882.2, wet mass 1000 kg
- xylene: 0.342528, 0.0618394 kg (2 suppliers, which the file names only by identifier); sum of these 0.404368 kg; lognormal variance with pedigree 0.0098, pedigree (2,5,2,1,2)
  properties: carbon content, fossil 0.905061, dry mass 1 kg, heating value, net 38.84 MJ, wet mass 1 kg

## Inputs from nature
- Water, cooling, unspecified natural origin [natural resource, in water]: 0.0526511 m3; lognormal variance with pedigree 0.0498, pedigree (2,5,2,4,4)
- Water, river [natural resource, in water]: 0.00345624 m3; lognormal variance with pedigree 0.0498, pedigree (2,5,2,4,4)
- Water, well, in ground [natural resource, in water]: 0.00292314 m3; lognormal variance with pedigree 0.0498, pedigree (2,5,2,4,4)

## Emissions to nature
- Carbon dioxide, fossil [air, unspecified]: 0.444449 kg; lognormal variance with pedigree 0.0098, pedigree (2,5,2,2,2)
- Formaldehyde [air, unspecified]: 0.000574679 kg; lognormal variance with pedigree 0.0492, pedigree (2,5,2,2,2)
- Hydrogen [air, unspecified]: 0.00011575 kg; lognormal variance with pedigree 0.0492, pedigree (2,5,2,2,2)
- Nitric acid [air, urban air close to ground]: 0.000912031 kg; lognormal variance with pedigree 0.0492, pedigree (2,5,2,2,2)
- Nitrogen [air, unspecified]: 0.053027 kg; lognormal variance with pedigree 0.0892, pedigree (2,5,2,4,4)
- Water [air, unspecified]: 0.0052626 m3; lognormal variance with pedigree 0.0892, pedigree (2,5,2,4,4)
- BOD5, Biological Oxygen Demand [water, unspecified]: 0.0210395 kg; lognormal variance with pedigree 0.0492, pedigree (2,5,2,2,2)
- COD, Chemical Oxygen Demand [water, unspecified]: 0.0210395 kg; lognormal variance with pedigree 0.0492, pedigree (2,5,2,2,2)
- Chloride [water, surface water]: 0.25526 kg; lognormal variance with pedigree 0.0492, pedigree (2,5,2,2,2)
- DOC, Dissolved Organic Carbon [water, unspecified]: 0.00637824 kg; lognormal variance with pedigree 0.0492, pedigree (2,5,2,2,2)
- Sodium I [water, surface water]: 0.165539 kg; lognormal variance with pedigree 0.0492, pedigree (2,5,2,2,2)
- TOC, Total Organic Carbon [water, unspecified]: 0.00637824 kg; lognormal variance with pedigree 0.0492, pedigree (2,5,2,2,2)
- Water [water, unspecified]: 0.0541026 m3; lognormal variance with pedigree 0.0892, pedigree (2,5,2,4,4)

## Sampling procedure
Literature data and stoichiometric calculation. This inventory is partially based on a generic model of the production of chemicals. The data generated by this model have been improved with compound-specific data when available.
The model of the production of chemicals is using specific industry or literature data wherever possible and more generic data on chemical production processes to fill compound-specific data gaps when necessary. The basic principles of the model have been published in literature (Hischier, 2005). The model has been updated and extended with newly available data from the chemical industry.
In the model, unreacted fractions are treated in a waste treatment process, and emissions reported are after a waste treatment process that is included in the scope of this dataset. For volatile reactants, a small level of evaporation is assumed. Solvents and catalysts are mostly recycled in closed-loop systems within the scope of the dataset and reported flows are for losses from this system.
The main source of information for the values for heat, electricity, water (process and cooling), nitrogen, chemical factory is industry data from the GENDORF Chemical Park. The values are a 5-year average of data from 2015 to 2019 published by the GENDORF Chemical Park, which is based in Germany and produced an average of 2462760 tonnes of chemical substances in the years 2015-2019.

Reference(s):
Hischier, R. (2005) Establishing Life Cycle Inventories of Chemicals Based on Differing Data Availability (9 pp). The International Journal of Life Cycle Assessment, Volume 10, Issue 1, pp 59–67. 10.1065/lca2004.10.181.7
Chemiepark GENDORF, Umwelterklärung 2016, https://www.gendorf.de/Nachbarn/Umweltschutz/Industrie%20und%20Nachhaltigkeit
Chemiepark GENDORF, Umwelterklärung 2017, https://www.gendorf.de/Nachbarn/Umweltschutz/Industrie%20und%20Nachhaltigkeit
Chemiepark GENDORF, Umwelterklärung 2020, https://www.gendorf.de/Nachbarn/Umweltschutz/Industrie%20und%20Nachhaltigkeit
Unger T., (1996). Pesticide Synthesis Handbook, Noyes Publication.
Appleby A.P., Muller F., Carpy, S., (2011): Weed Control, in Ullmanns Encyclopedia of Industrial Chemistry, Weinheim, Wiley-VCH.Chemiepark GENDORF, Umwelterklärung 2016, https://www.gendorf.de/Nachbarn/Umweltschutz/Industrie%20und%20Nachhaltigkeit
