# treatment of waste glass, municipal incineration

Dataset: EcoSpold 2, unit process
Geography: CH
Time period: 1994-01-01 to 2022-12-31
Technology level: outdated
Classification: EcoSpold01Categories: waste management/municipal incineration
Classification: ISIC rev.4 ecoinvent: 3821:Treatment and disposal of non-hazardous waste
Tags: ConvertedDataset; Treatment
Scenario: Business-as-Usual
System model: Substitution, consequential, long-term
Generated by: Gabor Doka (obsolete)
Published in: Doka G. 2007
Database: ecoinvent
isCopyrightProtected: true
accessRestrictedTo: 1

## General comment
Inventoried waste contains 100% Glass; .
waste composition (wet, in ppm): upper heating value 0.1423 MJ/kg; lower heating value 0.04602 MJ/kg; H2O 20000; O 483070; H n.a.; C n.a.; S n.a.; N n.a.; P n.a.; B n.a.; Cl 195.89; Br n.a.; F n.a.; I n.a.; Ag n.a.; As n.a.; Ba n.a.; Cd n.a.; Co n.a.; Cr 303.63; Cu 7.8356; Hg n.a.; Mn n.a.; Mo n.a.; Ni n.a.; Pb 38.688; Sb n.a.; Se n.a.; Sn n.a.; V n.a.; Zn 3.9178; Be n.a.; Sc n.a.; Sr n.a.; Ti n.a.; Tl n.a.; W n.a.; Si 359090; Fe n.a.; Ca 72818; Al n.a.; K n.a.; Mg n.a.; Na 64472;
Share of carbon in waste that is biogenic 60.4%.
Share of iron in waste that is metallic/recyclable 0%.
Net energy produced in MSWI: 0MJ/kg waste electric energy and 0MJ/kg waste thermal energy
Allocation of energy production: no substitution or expansion. Total burden allocated to waste disposal function of MSWI.
One kg of this waste produces 0.9777 kg of slag and 0 kg of residues, which are landfilled.
[This dataset was already contained in the ecoinvent database version 2. It was not individually updated during the transfer to ecoinvent version 3. Life Cycle Impact Assessment results may still have changed, as they are affected by changes in the supply chain, i.e. in other datasets. This dataset was generated following the ecoinvent quality guidelines for version 2. It may have been subject to central changes described in the ecoinvent version 3 change report (http://www.ecoinvent.org/database/ecoinvent-version-3/reports-of-changes/), and the results of the central updates were reviewed extensively. The changes added e.g. consistent water flows and other information throughout the database. The documentation of this dataset can be found in the ecoinvent reports of version 2, which are still available via the ecoinvent website. The change report linked above covers all central changes that were made during the conversion process.]

## Included activities end
waste-specific air and water emisions from incineration, auxiliary material consumption for flue gas cleaning. Short-term emissions to river water and long-term emisisons to ground water from slag compartment (from bottom slag) and residual material landfill (from solidified fly ashes and scrubber slugde). Process energy demands for MSWI.

## Geography
Specific to the technology mix encountered in Switzerland in 2000. Well applicable to modern incineration practices in Europe, North America or Japan.

## Technology
replaced by newer incineration technology with fly ash extraction. Average Swiss MSWI plants in 2000 with electrostatic precipitator for fly ash (ESP), wet flue gas scrubber and 29.4% SNCR , 32.2% SCR-high dust , 24.6% SCR-low dust -DeNOx facilities and 13.8% without Denox (by burnt waste, according to Swiss average). Share of waste incinerated in plants with magnetic scrap separation from slag : 50%. Gross electric efficiency technology mix 12.997% and Gross thermal efficiency technology mix 25.57%

## Time period
Waste composition as given in literature reference, theoretical data or other source. Transfer coefficients for modern Swiss MSWI. Emission speciation based on early 90ies data.

## Reference product
- waste glass: -1 kg; By-product classification Waste; CPC 37111: Glass in the mass, in balls (except microspheres), rods or tubes, unworked; waste and scrap of glass
  properties: carbon allocation 0 kg, carbon content 0, carbon content, fossil 0, carbon content, non-fossil 0, dry mass 1 kg, heating value, net 0.05 MJ, price 0 EUR2005, water content 0, water in wet mass 0 kg, wet mass 1 kg

## Inputs from technosphere
- electricity, for reuse in municipal waste incineration only: 0.142 kWh; lognormal variance with pedigree 0.44, pedigree (1,1,5,1,1)
- heat, for reuse in municipal waste incineration only: 0.827 MJ; lognormal variance with pedigree 0, pedigree (1,1,5,1,1)
- municipal waste incineration facility: 2.5e-10 unit; lognormal variance with pedigree 0, pedigree (1,1,5,1,1)
- process-specific burdens, municipal waste incineration: 1 kg; lognormal variance with pedigree 0, pedigree (1,1,5,1,1)
- process-specific burdens, slag landfill: 0.978 kg; lognormal variance with pedigree 0.01, pedigree (1,1,5,1,1)
- slag landfill: 1.74e-9 unit; lognormal variance with pedigree 0.01, pedigree (1,1,5,1,1)

## Emissions to nature
- Carbon monoxide, fossil [air, urban air close to ground]: 8.82e-5 kg; lognormal variance with pedigree 0.650825, pedigree (1,3,5,2,1)
- Carbon monoxide, non-fossil [air, urban air close to ground]: 0.000135 kg; lognormal variance with pedigree 0.650825, pedigree (1,3,5,2,1)
- Methane, fossil [air, urban air close to ground]: 2.53e-6 kg; lognormal variance with pedigree 0.059225, pedigree (2,3,5,2,1)
- Methane, non-fossil [air, urban air close to ground]: 3.86e-6 kg; lognormal variance with pedigree 0.059225, pedigree (2,3,5,2,1)
- Calcium II [water, ground-, long-term]: 0.0725 kg; lognormal variance with pedigree 0.15, pedigree (1,1,5,1,1)
- Calcium II [water, surface water]: 0.000318 kg; lognormal variance with pedigree 0.62, pedigree (1,1,5,1,1)
- Chloride [water, ground-, long-term]: 2.67e-5 kg; lognormal variance with pedigree 0.89, pedigree (1,1,5,1,1)
- Chloride [water, surface water]: 0.000169 kg; lognormal variance with pedigree 0.87, pedigree (1,1,5,1,1)
- Chromium VI [water, ground-, long-term]: 1.99e-6 kg; lognormal variance with pedigree 4.13, pedigree (1,1,5,1,1)
- Chromium VI [water, surface water]: 8.68e-9 kg; lognormal variance with pedigree 1.94, pedigree (1,1,5,1,1)
- Copper ion [water, ground-, long-term]: 7.84e-6 kg; lognormal variance with pedigree 1.3, pedigree (1,1,5,1,1)
- Copper ion [water, surface water]: 2.72e-10 kg; lognormal variance with pedigree 2.4, pedigree (1,1,5,1,1)
- Lead II [water, ground-, long-term]: 3.87e-5 kg; lognormal variance with pedigree 1.09, pedigree (1,1,5,1,1)
- Lead II [water, surface water]: 7.06e-10 kg; lognormal variance with pedigree 2.27, pedigree (1,1,5,1,1)
- Silicon [water, ground-, long-term]: 0.00307 kg; lognormal variance with pedigree 5.69, pedigree (1,1,5,1,1)
- Silicon [water, surface water]: 1.32e-5 kg; lognormal variance with pedigree 1.12, pedigree (1,1,5,1,1)
- Sodium I [water, ground-, long-term]: 0.0566 kg; lognormal variance with pedigree 0.16, pedigree (1,1,5,1,1)
- Sodium I [water, surface water]: 0.00787 kg; lognormal variance with pedigree 0.27, pedigree (1,1,5,1,1)
- Zinc II [water, ground-, long-term]: 3.92e-6 kg; lognormal variance with pedigree 1.39, pedigree (1,1,5,1,1)
- Zinc II [water, surface water]: 1.17e-10 kg; lognormal variance with pedigree 2.51, pedigree (1,1,5,1,1)

## Sampling procedure
waste-specific calculation based on literature data

## Extrapolations
Typical elemental transfer coefficients from current studies for modern MSWI, completed with data from coal power plants and estimates, adapted for inert/burnable waste.

## Review by Niels Jungbluth 2003-07-15
Passed. Calculation for standard deviation 95 of, i.e., infrastructure,
land occupation, transport services or other services can differ from
standard Pedigree approach used in this project and figures obtained by
this procedure.
