# process-specific burdens, sanitary landfill

Dataset: EcoSpold 2, unit process
Geography: RoW
Time period: 1995-01-01 to 2022-12-31
Technology level: current
Classification: ISIC rev.4 ecoinvent: 3821:Treatment and disposal of non-hazardous waste
Classification: EcoSpold01Categories: waste management/sanitary landfill
Synonyms: municipal landfill
Tags: ConvertedDataset
Scenario: Business-as-Usual
System model: Substitution, consequential, long-term
Generated by: Gabor Doka (obsolete)
Published in: Doka G. 2007
Database: ecoinvent
isCopyrightProtected: true
accessRestrictedTo: 1

## General comment
landfill for untreated municipal solid waste
[This dataset was already contained in the ecoinvent database version 2. It was not individually updated during the transfer to ecoinvent version 3. Life Cycle Impact Assessment results may still have changed, as they are affected by changes in the supply chain, i.e. in other datasets. This dataset was generated following the ecoinvent quality guidelines for version 2. It may have been subject to central changes described in the ecoinvent version 3 change report (http://www.ecoinvent.org/database/ecoinvent-version-3/reports-of-changes/), and the results of the central updates were reviewed extensively. The changes added e.g. consistent water flows and other information throughout the database. The documentation of this dataset can be found in the ecoinvent reports of version 2, which are still available via the ecoinvent website. The change report linked above covers all central changes that were made during the conversion process.]

## Included activities end
process-specific (i.e. independent of waste composition) energy demand and land use of landfill

## Geography
Specific to the technology encountered in Switzerland in 2000. Well applicable to modern landfilling practices in Europe, North America or Japan.

## Technology
Swiss municipal landfill for biogenic or untreated municipal waste ('reactive organic landfill'). Landfill gas and leachate collection system. Recultivation and monitoring for 150 years after closure.

## Reference product
- process-specific burdens, sanitary landfill: 1 kg; By-product classification allocatable product; CPC 39: Wastes or scraps
  production volume 3.96633 kg
  properties: carbon allocation 0 kg, carbon content 0, price 0.00103061 EUR2005

## Inputs from technosphere
- diesel, burned in building machine: 0.0467 MJ; lognormal variance with pedigree 0.0252, pedigree (2,3,5,5,1)
  properties: heating value, net 1 MJ
- electricity, low voltage: 5.742e-7, 2.08738e-7, 4.26915e-8, 1.69829e-7, 1.22438e-6, 1.13988e-6, 1.02209e-5, 1.41941e-6 kWh (8 suppliers, which the file names only by identifier); sum of these 1.5e-5 kWh; lognormal variance with pedigree 0.0252, pedigree (2,3,5,5,1)
- electricity, medium voltage: 0.000115534, 2.13943e-5, 4.32274e-6, 5.49218e-5, 0.00011626, 0.000953235, 8.00409e-5, 4.29014e-6 kWh (8 suppliers, which the file names only by identifier); sum of these 0.00135 kWh; lognormal variance with pedigree 0.0252, pedigree (2,3,5,5,1)
- heat, central or small-scale, other than natural gas: 0.00151017, 3.22857e-6 MJ (2 suppliers, which the file names only by identifier); sum of these 0.0015134 MJ; lognormal variance with pedigree 0.0252, pedigree (2,3,5,5,1)
  properties: heating value, net 1 MJ

## Inputs from nature
- Occupation, construction site [natural resource, land]: 0.00025 m2*year; lognormal variance with pedigree 0.0552, pedigree (2,3,5,5,1)
- Occupation, dump site [natural resource, land]: 0.0015 m2*year; lognormal variance with pedigree 0.0552, pedigree (2,3,5,5,1)
- Occupation, shrub land, sclerophyllous [natural resource, land]: 0.00025 m2*year; lognormal variance with pedigree 0.0552, pedigree (2,3,5,5,1)
- Transformation, from dump site, sanitary landfill [natural resource, land]: 5e-5 m2; lognormal variance with pedigree 0.1452, pedigree (2,3,5,5,1)
- Transformation, from pasture, man made [natural resource, land]: 5e-5 m2; lognormal variance with pedigree 0.1452, pedigree (2,3,5,5,1)
- Transformation, from shrub land, sclerophyllous [natural resource, land]: 5e-5 m2; lognormal variance with pedigree 0.1452, pedigree (2,3,5,5,1)
- Transformation, to dump site, sanitary landfill [natural resource, land]: 5e-5 m2; lognormal variance with pedigree 0.1452, pedigree (2,3,5,5,1)
- Transformation, to forest, unspecified [natural resource, land]: 5e-5 m2; lognormal variance with pedigree 0.1452, pedigree (2,3,5,5,1)
- Transformation, to shrub land, sclerophyllous [natural resource, land]: 5e-5 m2; lognormal variance with pedigree 0.1452, pedigree (2,3,5,5,1)

## Sampling procedure
data from one literature source

## Extrapolations
This dataset has been copied from an original dataset covering the geography CH. The uncertainty has been adjusted accordingly.

## Review by Niels Jungbluth 2003-06-18
Passed.
