# strontium mine operation and beneficiation

Dataset: EcoSpold 2, unit process
Geography: RoW
Time period: 2014-01-01 to 2022-12-31
Technology level: current
Classification: EcoSpold01Categories: construction materials/additives
Classification: ISIC rev.4 ecoinvent: 0729:Mining of other non-ferrous metal ores
Synonyms: SrSO4; celestine; celestite
Scenario: Business-as-Usual
System model: Substitution, consequential, long-term
Share of production covered: 100 %
Generated by: Eleonora Crenna
Published in: Philip Nuss 2014
Database: ecoinvent
isCopyrightProtected: true
accessRestrictedTo: 1

## General comment
This dataset represents the global production of 1 kg strontium sulfate (SrSO4, 90% concentrate) from celestite ores. Celestite is the mineral available at the mining site and includes strontium sulfate (i.e. the marketable product) and impurities, which are eliminated through the beneficiation process. Concentrated strontium sulfate is an intermediate product: it is indeed used as a precursor for the production of strontium carbonate. The system includes consumption of raw materials, energy, infrastructure, as well as the generation of emissions to air and water. Production during stable operation conditions is represented. The source of the data (Nuss & Eckelman, 2014) has been applied to represent celestite global production, of which Spain and China represent respectively 41% and 23% in 2019 (USGS 2020).
References:
Nuss, P., & Eckelman, M. J. (2014). Life cycle assessment of metals: a scientific synthesis. PLoS One, 9(7), e101298.
USGS 2020. Mineral Commodity Summaries - Strontium. Available at: https://pubs.usgs.gov/periodicals/mcs2020/mcs2020.pdf
[This dataset is meant to replace the following datasets:
- strontium sulfate quarry operation, GLO, 2012 - 2012]

## Included activities start
The activity starts with the construction of the mine site and the extraction of celestite ore (SrSO4)

## Included activities end
The activity ends with the production of strontium sulfate 90% concentrate. The majority of strontium (metal, carbonate, etc.) producers require at least 90% strontium sulfate content for economic profitability. Reference: USGS, 2015 - Minerals Yearbook, Strontium. Available at: https://s3-us-west-2.amazonaws.com/prd-wret/assets/palladium/production/mineral-pubs/strontium/myb1-2015-stron.pdf

## Geography
This data set is derived from the corresponding data set with geography China and Spain

## Technology
Celestite ores (SrSO4) are mined from both open cast and underground mines. Due to a lack of knowledge on the exact global share of both operations, the open-cast mining is assumed in this dataset. About 47 to 87 kg of celestite (3.8-3.9 g/cm3) are contained in one cubic meter of ore containing limestone, quartz, gypsum, and dolomite (all <3 g/cm3). During the mine operations, celestite is broken by drilling and blasting and the raw ore is mined. Assuming an average yield of 67 kg celestite/m3 ore, an average density of 3.85 t/m3 ore, and a recovery efficiency of 75%, 76.62 kg of ore are mined per kg of celestite. Impurities are removed via desliming and celestite separated from other ores by means of density separation. Between 80% and 95% of strontium sulfate contained in the ore can be extracted.
References:
Nuss, P., & Eckelman, M. J. (2014). Life cycle assessment of metals: a scientific synthesis. PLoS One, 9(7), e101298.

## Time period
Data are considered valid from 2014 (year of the publication) to 2020.

## Parameters
- fraction, process water, to air: 0.15 dimensionless; name fraction_PW_to_air
  Literature value. In case when no industry/process specific data are available, default evaporation fraction value is used. This value is 15% and is based on literature (Statistics Canada, 2007 & Shaffer, K.H., 2008, Consumptive water use in the Great Lakes Basin, USGS & Shiklomanov, 2003, World Water Resources at the Beginning of the 21st Century) and has been approved by an expert.
- ore, mined: 76.6169 kg; name ore_mined; = 3850/67/0.75
  Calculated from Nuss & Eckelman (2014). Celestite mined ore, calculated based on average yield of 67 kg celestite/m3 ore, a density of 3.85 t/m3 ore, and a recovery efficiency of 75%,
- recovery rate strontium: 0.75 dimensionless

## Reference product
- strontium sulfate, 90% SrSO4: 1 kg; By-product classification allocatable product; CPC 14290: Other non-ferrous metal ores and concentrates (other than uranium or thorium ores and concentrates)
  production volume 8e7 kg
  properties: carbon allocation 0 kg, carbon content 0, carbon content, fossil 0, carbon content, non-fossil 0, dry mass 1 kg, price 0.1 EUR2005, strontium content 0.4293, water content 0, water in wet mass 0 kg, wet mass 1 kg

## Inputs from technosphere
- blasting: 0.0199204 kg; lognormal variance with pedigree 0.1268, pedigree (4,5,5,5,1)
- conveyor belt: 5.82289e-6 m; lognormal variance with pedigree 0.1268, pedigree (4,5,5,5,1)
- diesel, burned in building machine: 0.0921 MJ; lognormal variance with pedigree 0.184, pedigree (4,5,5,5,5)
  properties: heating value, net 1 MJ
- electricity, medium voltage: 0.000466206, 0.0243575, 0.00291779, 0.0462871, 0.0276601, 0.000646348, 0.000556986, 0.0026546, 0.00879935, 0.00156928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 kWh (84 suppliers, which the file names only by identifier); sum of these 1.48989 kWh; lognormal variance with pedigree 0.1268, pedigree (4,5,5,5,1)
- mine infrastructure, open cast, non-ferrous metal: 5e-11 unit; lognormal variance with pedigree 0.4288, pedigree (4,5,5,5,1)
- non-sulfidic overburden, off-site: -75.6169 kg; lognormal variance with pedigree 0.1268, pedigree (4,5,5,5,1)
  properties: dry mass 1 kg, wet mass 1 kg
- wastewater, average: -0.00126868, -0.211114, -0.000751646 m3 (3 suppliers, which the file names only by identifier); sum of these -0.213134 m3; lognormal variance with pedigree 0.1268, pedigree (4,5,5,5,1)
  properties: carbon content, non-fossil 0.194039, dry mass 0.346837 kg, water content 2882.2, wet mass 1000 kg

## Inputs from nature
- Gangue [natural resource, in ground]: 75.835 kg; lognormal variance with pedigree 0.1268, pedigree (4,5,5,5,1)
- Occupation, mineral extraction site [natural resource, land]: 0.536852 m2*year; lognormal variance with pedigree 0.1678, pedigree (4,5,5,5,1)
- Strontium [natural resource, in ground]: 0.57243 kg; lognormal variance with pedigree 0.1268, pedigree (4,5,5,5,1)
- Sulfur [natural resource, in ground]: 0.209484 kg; lognormal variance with pedigree 0.1268, pedigree (4,5,5,5,1)
- Transformation, from unspecified [natural resource, land]: 0.00456857 m2; lognormal variance with pedigree 0.246, pedigree (4,5,5,5,1)
- Transformation, to mineral extraction site [natural resource, land]: 0.00456857 m2; lognormal variance with pedigree 0.246, pedigree (4,5,5,5,1)
- Water, unspecified natural origin [natural resource, in water]: 0.250746 m3; lognormal variance with pedigree 0.1268, pedigree (4,5,5,5,1)

## Emissions to nature
- Water [air, unspecified]: 0.0376119 m3; lognormal variance with pedigree 0.1268, pedigree (4,5,5,5,1)

## Sampling procedure
From Literature and estimation.

## Extrapolations
Some input values are extrapolated from other Ecoinvent datasets (see comments in Exchanges).
Calculated as weighted average of production in Spain(41%) and China (23%)
