# paraffin production

Dataset: EcoSpold 2, unit process
Geography: RER
Time period: 1995-01-01 to 2022-12-31
Technology level: current
Classification: ISIC rev.4 ecoinvent: 1920:Manufacture of refined petroleum products
Classification: EcoSpold01Categories: chemicals/organics
Synonyms: wax; Wachs
Tags: ConvertedDataset
Scenario: Business-as-Usual
System model: Substitution, consequential, long-term
Generated by: Roland Hischier
Published in: Zah R. 2007
Database: ecoinvent
isCopyrightProtected: true
accessRestrictedTo: 1

## General comment
data based on the ECOSOL study of the European surfactant industry. Allocations in multioutput processes were made, using the relative mass outputs of products.
[This dataset was already contained in the ecoinvent database version 2. It was not individually updated during the transfer to ecoinvent version 3. Life Cycle Impact Assessment results may still have changed, as they are affected by changes in the supply chain, i.e. in other datasets. This dataset was generated following the ecoinvent quality guidelines for version 2. It may have been subject to central changes described in the ecoinvent version 3 change report (http://www.ecoinvent.org/database/ecoinvent-version-3/reports-of-changes/), and the results of the central updates were reviewed extensively. The changes added e.g. consistent water flows and other information throughout the database. The documentation of this dataset can be found in the ecoinvent reports of version 2, which are still available via the ecoinvent website. The change report linked above covers all central changes that were made during the conversion process.]

## Included activities end
This module contains material and energy input, production of waste and emissions for the production of n-paraffins out of crude oil. Water consumption and infrastructure have been estimated.

## Geography
Data based on the European paraffin production

## Technology
Average technology, typical for European production conditions in the mid 90s

## Time period
data of published literature

## Parameters
- fraction, cooling water, cooling pond system, to air: 0.032 dimensionless; name fraction_CW_CP_to_air; lognormal variance with pedigree 0.0413, pedigree (2,3,1,3,1)
  Calculated based on literature value (Scown, C.D., 2011, Water Footprint of U.S. Transportation Fuels and supplying information of the article) (Vionnet, S., Quantis Water Database - Technical Report, 2012).
- fraction, cooling water, once-through system, to air: 0.004 dimensionless; name fraction_CW_OT_to_air; lognormal variance with pedigree 0.0413, pedigree (2,3,1,3,1)
  (same comment as for fraction, cooling water, cooling pond system, to air)
- fraction, cooling water, recirculating system, to air: 0.771 dimensionless; name fraction_CW_R_to_air; lognormal variance with pedigree 0.0413, pedigree (2,3,1,3,1)
  (same comment as for fraction, cooling water, cooling pond system, to air)
- fraction, cooling water, to air: 0.3875 dimensionless; name fraction_CW_to_air; = (0.5*fraction_CW_OT_to_air)+(0.5*fraction_CW_R_to_air); lognormal variance with pedigree 0.092025, pedigree (4,4,3,2,4)
  Calculated value based on literature value (see comments of the other parametres present in this dataset) and expert opinion. In the case when no industry/literature data are available about the type of cooling or directly fraction, cooling water, to air specific for the process a default assumption is applied. It is assumed that the once-through cooling system is used in 50% of all cases and recirculating system is used in another 50% of all cases.
- fraction, process water, to air: 0.205 dimensionless; name fraction_PW_to_air; lognormal variance with pedigree 0.092025, pedigree (4,4,3,2,4)
  Literature value (Statistics Canada, 2007 & Shaffer, K.H., 2008, Consumptive water use in the Great Lakes Basin, USGS) (Vionnet, S., Quantis Water Database - Technical Report, 2012).

## Reference product
- paraffin: 1 kg; By-product classification allocatable product; CPC 33500: Petroleum jelly; paraffin wax, micro- crystalline petroleum wax, slack wax, ozokerite, lignite wax, peat wax, […]
  production volume 1.32237 kg
  properties: carbon allocation 0.847059 kg, carbon content 0.847059, carbon content, fossil 0.847059, carbon content, non-fossil 0, dry mass 1 kg, heating value, net 41.5 MJ, price 0.615 EUR2005, water content 0, water in wet mass 0 kg, wet mass 1 kg

## Inputs from technosphere
- chemical factory, organics: 4e-10 unit; lognormal variance with pedigree 0.48, pedigree (5,5,5,5,4)
- electricity, medium voltage: 0.0258 kWh; lognormal variance with pedigree 0.0362, pedigree (4,5,5,1,1)
- heat, district or industrial, natural gas: 2.77 MJ; lognormal variance with pedigree 0.0362, pedigree (4,5,5,1,1)
  properties: heating value, net 1 MJ
- heat, district or industrial, other than natural gas: 2.027 MJ; lognormal variance with pedigree 0.0362, pedigree (4,5,5,1,1)
  properties: heating value, net 1 MJ
- municipal solid waste: -0.00492 kg; lognormal variance with pedigree 0.0188, pedigree (2,5,2,1,1)
  properties: carbon content, fossil 0.171549, carbon content, non-fossil 0.261655, dry mass 0.771 kg, heating value, net 11.74 MJ, water content 0.297017, wet mass 1 kg

## Inputs from nature
- Oil, crude [natural resource, in ground]: 1.08 kg; lognormal variance with pedigree 0.0188, pedigree (2,5,5,1,1)
- Water, cooling, unspecified natural origin [natural resource, in water]: 0.024 m3; lognormal variance with pedigree 0.17, pedigree (5,5,5,5,4)
- Water, unspecified natural origin [natural resource, in water]: 0.006 m3; lognormal variance with pedigree 0.17, pedigree (5,5,5,5,4)

## Emissions to nature
- Carbon dioxide, fossil [air, urban air close to ground]: 0.311 kg; lognormal variance with pedigree 0.0188, pedigree (2,5,5,1,1)
- Carbon monoxide, fossil [air, urban air close to ground]: 4e-5 kg; lognormal variance with pedigree 0.6688, pedigree (2,5,5,1,1)
- NMVOC, non-methane volatile organic compounds [air, urban air close to ground]: 0.00082 kg; lognormal variance with pedigree 0.0588, pedigree (2,5,5,1,1)
- Nitrogen oxides [air, urban air close to ground]: 0.00172 kg; lognormal variance with pedigree 0.0588, pedigree (2,5,5,1,1)
- Particulate Matter, < 2.5 um [air, urban air close to ground]: 5.25e-5 kg; lognormal variance with pedigree 0.3288, pedigree (2,5,5,1,1)
- Particulate Matter, > 10 um [air, urban air close to ground]: 6.72e-5 kg; lognormal variance with pedigree 0.0588, pedigree (2,5,5,1,1)
- Particulate Matter, > 2.5 um and < 10um [air, urban air close to ground]: 9.03e-5 kg; lognormal variance with pedigree 0.1388, pedigree (2,5,5,1,1)
- Sulfur dioxide [air, urban air close to ground]: 0.00158 kg; lognormal variance with pedigree 0.0188, pedigree (2,5,5,1,1)
- Water [air, unspecified]: 0.01053 m3; lognormal variance with pedigree 0.0407, pedigree (2,2,5,1,1)
- Aluminium III [water, surface water]: 7.71e-8 kg; lognormal variance with pedigree 0.6688, pedigree (2,5,5,1,1)
- Ammonium [water, surface water]: 2.23e-6 kg; lognormal variance with pedigree 0.0588, pedigree (2,5,5,1,1)
- BOD5, Biological Oxygen Demand [water, surface water]: 2e-5 kg; lognormal variance with pedigree 0.0588, pedigree (2,5,5,1,1)
- COD, Chemical Oxygen Demand [water, surface water]: 8.4e-5 kg; lognormal variance with pedigree 0.0588, pedigree (2,5,5,1,1)
- Chromium III [water, surface water]: 2.32e-7 kg; lognormal variance with pedigree 0.6688, pedigree (2,5,5,1,1)
- DOC, Dissolved Organic Carbon [water, surface water]: 3.11111e-5 kg; lognormal variance with pedigree 0.0588, pedigree (2,5,5,1,1)
- Fluoride [water, surface water]: 5.42e-7 kg; lognormal variance with pedigree 0.0588, pedigree (2,5,5,1,1)
- Iron ion [water, surface water]: 3.86e-7 kg; lognormal variance with pedigree 0.6688, pedigree (2,5,5,1,1)
- Nickel II [water, surface water]: 2.32e-7 kg; lognormal variance with pedigree 0.6688, pedigree (2,5,5,1,1)
- Oils, unspecified [water, surface water]: 1.4e-6 kg; lognormal variance with pedigree 0.3288, pedigree (2,5,5,1,1)
- Phenol [water, surface water]: 1.65e-7 kg; lognormal variance with pedigree 0.0588, pedigree (2,5,5,1,1)
- Phosphate [water, surface water]: 1.61e-6 kg; lognormal variance with pedigree 0.0588, pedigree (2,5,5,1,1)
- Sulfide [water, surface water]: 7.71e-8 kg; lognormal variance with pedigree 0.0588, pedigree (2,5,5,1,1)
- Suspended solids, unspecified [water, surface water]: 9.7e-6 kg; lognormal variance with pedigree 0.0588, pedigree (2,5,5,1,1)
- TOC, Total Organic Carbon [water, surface water]: 3.11111e-5 kg; lognormal variance with pedigree 0.0588, pedigree (2,5,5,1,1)
- Water [water, unspecified]: 0.01947 m3; lognormal variance with pedigree 0.0407, pedigree (2,2,5,1,1)
- Zinc II [water, surface water]: 7.71e-8 kg; lognormal variance with pedigree 0.6688, pedigree (2,5,5,1,1)

## Extrapolations
data out of ECOSOL study of European Surfactant Industry. Common translation rules used, reported in Chemical report (Althaus et al. 2003).

## Review by Heiko Kunst 2003-06-20
Passed
Passed
