# air input/output unit production, heat and power co-generation unit, 160kW electrical

Dataset: EcoSpold 2, unit process
Geography: RoW
Time period: 1987-01-01 to 2022-12-31
Technology level: current
Classification: ISIC rev.4 ecoinvent: 2813:Manufacture of other pumps, compressors, taps and valves
Classification: EcoSpold01Categories: natural gas/cogeneration
Tags: ConvertedDataset
Scenario: Business-as-Usual
System model: Substitution, consequential, long-term
Generated by: Thomas Heck
Published in: Heck, T. 2007
Database: ecoinvent
isCopyrightProtected: true
accessRestrictedTo: 1

## General comment
Inventory refers to infrastructure of an existing natural gas cogeneration plant (lambda=1 motor, 160kWe, operation start 1987) at Jakobsberg, Basel, Switzerland. (Life time for operation assumed 100'000 h.)
[This dataset was already contained in the ecoinvent database version 2. It was not individually updated during the transfer to ecoinvent version 3. Life Cycle Impact Assessment results may still have changed, as they are affected by changes in the supply chain, i.e. in other datasets. This dataset was generated following the ecoinvent quality guidelines for version 2. It may have been subject to central changes described in the ecoinvent version 3 change report (http://www.ecoinvent.org/database/ecoinvent-version-3/reports-of-changes/), and the results of the central updates were reviewed extensively. The changes added e.g. consistent water flows and other information throughout the database. The documentation of this dataset can be found in the ecoinvent reports of version 2, which are still available via the ecoinvent website. The change report linked above covers all central changes that were made during the conversion process.]

## Included activities end
The module includes the most important materials used for production. It includes also the transport of these materials and the energy and water needed for production.

## Geography
Data refers to a plant in Switzerland, assumed valid for Europe (RER)

## Technology
Component of a specific cogeneration unit installed in Switzerland. Technology at end of 1980s.

## Parameters
- fraction, process water, to air: 0.15 dimensionless; lognormal variance with pedigree 0.092025, pedigree (4,4,3,2,4)

## Reference product
- air input/output unit, heat and power co-generation unit, 160kW electrical: 1 unit; By-product classification allocatable product; CPC 43230: Air or vacuum pumps; air or other gas compressors
  production volume 2.67763 unit
  properties: carbon allocation 0 kg, carbon content 0, price 1125.53 EUR2005

## Inputs from technosphere
- electricity, low voltage: 121.523, 9.03518, 35.9424, 259.126, 241.243, 2163.13 kWh (6 suppliers, which the file names only by identifier); sum of these 2830 kWh; lognormal variance with pedigree 0.0866, pedigree (3,3,5,5,4)
- electricity, medium voltage: 3.17343, 0.118734, 1.50856, 26.1829, 2.19852, 0.117839 kWh (6 suppliers, which the file names only by identifier); sum of these 33.3 kWh; lognormal variance with pedigree 0.0866, pedigree (3,3,5,5,4)
- heat, district or industrial, natural gas: 202.758, 1336.24 MJ (2 suppliers, which the file names only by identifier); sum of these 1539 MJ; lognormal variance with pedigree 0.0866, pedigree (3,3,5,5,4)
  properties: heating value, net 1 MJ
- heat, district or industrial, other than natural gas: 28.3172, 16216.7 MJ (2 suppliers, which the file names only by identifier); sum of these 16245 MJ; lognormal variance with pedigree 0.0866, pedigree (3,3,5,5,4)
  properties: heating value, net 1 MJ
- reinforcing steel: 288 kg; lognormal variance with pedigree 0.15, pedigree (4,5,5,5,1)
  properties: carbon content, fossil 0.004, dry mass 1 kg, wet mass 1 kg
- transport, passenger car: 3000 km; lognormal variance with pedigree 0.212, pedigree (1,1,5,5,1)
- wastewater from pig iron production: -0.346 m3; lognormal variance with pedigree 0.302, pedigree (1,1,1,5,1)
  properties: carbon content, fossil 1.2149e-5, dry mass 0.337476 kg, water content 2962.17, wet mass 1000 kg

## Inputs from nature
- Water, unspecified natural origin [natural resource, in water]: 0.432 m3; lognormal variance with pedigree 0.302, pedigree (1,1,5,5,1)

## Emissions to nature
- Water [air, unspecified]: 0.0648 m3; lognormal variance with pedigree 0.0427, pedigree (2,2,5,5,1)
- Water [water, unspecified]: 0.0212 m3; lognormal variance with pedigree 0.0427, pedigree (2,2,5,5,1)

## Sampling procedure
Operator and manufacturer information

## Extrapolations
see Geography/Text This dataset has been copied from an original dataset covering the geography RER. The uncertainty has been adjusted accordingly.

## Review by Gerald Rebitzer (obsolete) 2003-08-27
had passed
