# beam, hardwood, raw, air drying to u=20%

Dataset: EcoSpold 2, unit process
Geography: RoW
Time period: 2011-01-01 to 2022-12-31
Technology level: current
Classification: ISIC rev.4 ecoinvent: 1610:Sawmilling and planing of wood
Scenario: Business-as-Usual
System model: Substitution, consequential, long-term
Share of production covered: 100 %
Generated by: Frank Werner
Published in: Werner, F. (Ed.) 2015
Database: ecoinvent
isCopyrightProtected: true
accessRestrictedTo: 1

## General comment
This dataset represents the natural air drying process of hardwood beam, per m3 dried wood. After sawing the softwood is dried. Air drying occurs during storage, which is assumed to take place at the sawmill site. Beams will be dried for 30 months. Shrinkage ratio of between the moisture content of u=30% - 0% is 0.004 %/%.
Within ecoinvent, three products - boards, beams and laths - are distinguished:
After being sawn, the resulting products can either be air dried down to a moisture content of u=20% (mass of water per dry mass), kiln dried down to u=20% or kiln dried down to u=10%. The activity name indicates the respective product, drying technology and target moisture.
The data was provided by and approved by the Swiss forest industry (Holzindustrie Schweiz HIS).

## Included activities start
Natural air drying process starting from sawn hardwood, at sawmill site.

## Included activities end
This activity ends with air dried hardwood beam at the sawmill.The dataset includes air drying of wet wood assumed as u=70% down to u=20%, shrinkage and land use. The dataset does not include air emissions released from the wood because the same emissions would occur if the wood would not be used.

## Geography
Represents average Swiss conditions.

## Parameters
- moisture content beam: 20 dimensionless; name moisture_beam
  moisture content of beam after drying
- moisture content sawnwood: 70 dimensionless; name moisture_sawnwood
  moisture content of sawn timber before drying
- shrinkage ratio (u=30% - 0%): 0.004 dimensionless; name shrinkage_ratio
  % volume loss/% loss of moisture content (u) between u=30% and u=0
- wood density, basic: 588.8 kg/m3; name basic_wood_d; = dry_wood_d*(1-moisture_beam*shrinkage_ratio)
  kg oven-dry matter/wet volume
- wood density, dry: 640 kg/m3; name dry_wood_d
  kg oven-dry matter/oven-dry volume

## Reference product
- sawnwood, beam, hardwood, raw, dried (u=20%): 1 m3; By-product classification allocatable product; CPC 31102: Wood, sawn or chipped lengthwise, sliced or peeled, of a thickness exceeding 6 mm, of non-coniferous wood
  production volume 2.04357e7 m3
  properties: carbon allocation 290.867 kg, carbon content 0.494, carbon content, fossil 0, carbon content, non-fossil 0.494, dry mass 588.8 kg, heating value, net 8524.3 MJ, price 265 EUR2005, water content 0.2, water in wet mass 117.76 kg, wet mass 706.56 kg

## Inputs from technosphere
- sawnwood, hardwood, raw: 1.04167 m3; lognormal variance with pedigree 0.21, pedigree (5,5,5,5,5)
  properties: carbon content, non-fossil 0.494, dry mass 563.2 kg, heating value, net 7462.65 MJ, water content 0.7, wet mass 957.44 kg

## Inputs from nature
- Occupation, industrial area [natural resource, land]: 0.008575 m2*year; lognormal variance with pedigree 0.21, pedigree (5,5,5,5,5)
- Transformation, from unspecified [natural resource, land]: 0.00343 m2; lognormal variance with pedigree 0.21, pedigree (5,5,5,5,5)
- Transformation, to industrial area [natural resource, land]: 0.00343 m2; lognormal variance with pedigree 0.21, pedigree (5,5,5,5,5)

## Emissions to nature
- Water [air, unspecified]: 0.292907 m3; lognormal variance with pedigree 0.0006, pedigree (1,1,4,1,1)

## Sampling procedure
complementary literature and sampling from sawmills

## Extrapolations
Extrapolation from Swiss data; uncertainties have been adjusted accordingly

## Review by Emilia Moreno Ruiz 2015-11-02
AL added
