# transport, freight, lorry >32 metric ton, EURO4

Dataset: EcoSpold 2, unit process
Geography: RoW
Time period: 2009-01-01 to 2022-12-31
Technology level: current
Classification: ISIC rev.4 ecoinvent: 4923:Freight transport by road
Scenario: Business-as-Usual
System model: Substitution, consequential, long-term
Share of production covered: 100 %
Generated by: Andrew Simons
Published in: Keller, M. 2010
Database: ecoinvent
isCopyrightProtected: true
accessRestrictedTo: 1

## General comment
This dataset represents the service of 1tkm freight transport in a lorry of the size class >32 metric tons gross vehicle weight (GVW) and Euro IV emissions class. The transport datasets refer to the entire transport life cycle i.e. to the construction, operation, maintenance and end of life of vehicle and road infrastructures. Fuel consumption and emissions are for average European journeys and load factors and not representative of a specific transport scenario. The average load factors are taken from the Tremove model v2.7b (2009) and EcoTransIT (2011) report. These are as follows:
Lorry size class Average load factor GVW
3.5-7.5t 0.98t 4.98t
7.5-16t 3.29t 9.29t
16-32t 5.79t 15.79t
>32t 15.96t 29.96t
The lorry size and load factor determines the GVW and therefore also the fuel consumption and amount of both exhaust and non-exhaust emissions. Non-exhaust emissions are those resulting from tyre, brake and road wear.
Fuel consumption and exhaust emissions are taken from v3.1 of the HBEFA model, using the data for Germany and without applying model weighting. There are a higher number of size categories used in HBEFA than in ecoinvent and so the data are grouped in order to fit the lorry size classes used in ecoinvent. The selective catalytic reduction (SCR) technology is around 3 times more common than that of exhaust gas recovery (EGR) as an emissions reduction measure and so the emission factors given in the dataset are weighted to reflect this. The data for the HBEFA categories SCR* and VI* were disregarded. The exhaust emissions caused by the burning of fuel are either fuel dependent (fuel type and quantity) or Euro class dependent. The latter reflect the emission regulations to which the vehicle complies. Regulated emissions are CO, NOx, particulate matter (PM) and total hydrocarbons (HC). Data from the Emissions Inventory Guidebook (EMEP/EEA, 2013) were used for specific exhaust emissions not covered by the HBEFA model.
Non-exhaust emissions are accounted for as weight dependent by-products and exist as seperate datasets.
For road infrastructure the expenditures and environmental interventions due to construction of roads have been allocated based on the gross tonne kilometer performance. Expenditures due to operation of the road infrastructure, as well as land use have been allocated based on the yearly vehicle kilometer performance. The same assumption on vehicle lifetime performance has been transferred from the ecoinvent v2 datasets of 540 000 km/vehicle. The production, maintenance and disposal of the vehicle are as reported in the ecoinvent (2007) report on transport services.
Main data sources:
De Ceuster, G., et al. (2009) TREMOVE: Final Report. Model code v2.7b, 2009. European Commission, Brussels.
Keller, M. et al. (2010) Handbook emission factors for road transport v3.1, HBEFA. INFRAS, Berne, CH.
Knörr, W. et al. (2011) Ecological Transport Information Tool for Worldwide Transports (EcoTransIT): Methodology and data update. Berlin, Hannover, Heidelberg, DE.
Ntziachristos, L., et al. (2013) EMEP/EEA air pollutant emissions inventory guidebook 2009: Exhaust emissions from road transport. European Environment Agency, Copenhagen, DK.
Spielmann, M., et al. (2007) Transport Services. ecoinvent report No. 14., Swiss Centre for Life Cycle Inventories, Dübendorf, CH.

## Included activities start
From combustion of fuel in the engine. The dataset takes as input the infrastructure of the lorry and road network, the materials and efforts needed for maintenance of these and the fuel consumed in the vehicle for the journey.

## Included activities end
The activity ends with the transport service of 1tkm and the emissions of exhaust and non-exhaust emissions into air, water and soil.

## Geography
This dataset is a copy from the RER geography, which contains the comment:
The data for road infrastructure reflect Swiss conditions. Data for vehicle operation, manufacturing and maintenance represents generic European data. Data for the vehicle disposal reflect the Swiss situation. The environmental interventions due to vehicle transport are modelled by linking the environmental interventions due to vehicle operation with impacts due to vehicle manufacturing, vehicle maintenance, vehicle disposal, road construction, operation and maintenance of roads and road disposal. So-called demand factors are used to link the transport service components to the functional unit of one tonne kilometre [tkm] (Spielmann & Scholz 2005).
References:
Spielmann M. and Scholz R. W. (2005) Life Cycle Inventories for Transport Services - Background Data for Freight Transport. In: Int J LCA, 10(1), pp.

## Technology
Diesel and diesel engine. Lorry transport is further differentiated with respect to vehicle weight and emission technology standard (EURO-standard).
Technology classifications are based on those used widely within the works of the European Environment Agency, particularly in the Emissions Inventory Guidebook.

## Reference product
- transport, freight, lorry >32 metric ton, EURO4: 1 metric ton*km; By-product classification allocatable product; CPC 6511: Road transport services of freight
  production volume 2.54926e12 metric ton*km
  properties: carbon allocation 0 kg, carbon content 0, price 0.0156553 EUR2005

## Inputs from technosphere
- brake wear emissions, lorry: -1.52616e-5 kg; lognormal variance with pedigree 0.0021, pedigree (2,2,2,4,1)
  properties: carbon content, fossil 0.149
- diesel, low-sulfur: 0.0162823, 0.000682031, 0.000675599, 0.000102517, 0.00136361, 4.52343e-5 kg (6 suppliers, which the file names only by identifier); sum of these 0.0191513 kg; lognormal variance with pedigree 0.0021, pedigree (2,2,5,4,1)
  properties: carbon content, fossil 0.865, dry mass 1 kg, heating value, net 42.8 MJ, wet mass 1 kg
- lorry, 40 metric ton: 9.65e-8 unit; lognormal variance with pedigree 0.304, pedigree (3,1,4,5,1)
- maintenance, lorry 40 metric ton: 9.65e-8 unit; lognormal variance with pedigree 0.304, pedigree (3,1,4,5,1)
- road: 0.00109 m*year; lognormal variance with pedigree 0.304, pedigree (3,1,4,5,1)
- road maintenance: 8.09172e-5 m*year; lognormal variance with pedigree 0.304, pedigree (3,1,4,5,1)
- road wear emissions, lorry: -1.31404e-5 kg; lognormal variance with pedigree 0.0021, pedigree (2,2,2,4,1)
  properties: carbon content, fossil 0.75
- tyre wear emissions, lorry: -0.000151208 kg; lognormal variance with pedigree 0.0021, pedigree (2,2,2,4,1)
  properties: carbon content, fossil 0.675

## Emissions to nature
- Acetaldehyde [air, unspecified]: 9.13364e-8 kg; lognormal variance with pedigree 0.0021, pedigree (2,2,5,4,1)
- Acrolein [air, unspecified]: 3.53754e-8 kg; lognormal variance with pedigree 0.0021, pedigree (2,2,5,4,1)
- Ammonia [air, unspecified]: 1.8797e-7 kg; lognormal variance with pedigree 0.0021, pedigree (2,2,5,4,1)
- Arsenic ion [air, unspecified]: 1.91513e-12 kg; lognormal variance with pedigree 0.0021, pedigree (2,2,5,4,1)
- Benzaldehyde [air, unspecified]: 2.73809e-8 kg; lognormal variance with pedigree 0.0021, pedigree (2,2,5,4,1)
- Benzene [air, unspecified]: 1.39903e-9 kg; lognormal variance with pedigree 0.0021, pedigree (2,2,5,4,1)
- Butane [air, unspecified]: 2.99791e-9 kg; lognormal variance with pedigree 0.0021, pedigree (2,2,5,4,1)
- Cadmium II [air, unspecified]: 1.66616e-10 kg; lognormal variance with pedigree 0.7015, pedigree (2,2,5,4,1)
- Carbon dioxide, fossil [air, unspecified]: 0.0610943 kg; lognormal variance with pedigree 0.0021, pedigree (2,2,5,4,1)
- Carbon monoxide, fossil [air, unspecified]: 9.06998e-5 kg; lognormal variance with pedigree 0.0021, pedigree (2,2,5,4,1)
- Chromium III [air, unspecified]: 5.74538e-10 kg; lognormal variance with pedigree 0.7015, pedigree (2,2,5,4,1)
- Chromium VI [air, unspecified]: 1.14908e-12 kg; lognormal variance with pedigree 0.7015, pedigree (2,2,5,4,1)
- Copper ion [air, unspecified]: 4.06007e-10 kg; lognormal variance with pedigree 0.7015, pedigree (2,2,5,4,1)
- Dinitrogen monoxide [air, unspecified]: 1.21535e-6 kg; lognormal variance with pedigree 0.0021, pedigree (2,2,5,4,1)
- Ethane [air, unspecified]: 5.99582e-10 kg; lognormal variance with pedigree 0.0021, pedigree (2,2,5,4,1)
- Formaldehyde [air, unspecified]: 1.67883e-7 kg; lognormal variance with pedigree 0.0021, pedigree (2,2,5,4,1)
- Heptane [air, unspecified]: 5.99582e-9 kg; lognormal variance with pedigree 0.0021, pedigree (2,2,5,4,1)
- Lead II [air, unspecified]: 9.9778e-10 kg; lognormal variance with pedigree 0.7015, pedigree (2,2,5,4,1)
- Mercury II [air, unspecified]: 1.01502e-10 kg; lognormal variance with pedigree 0.7015, pedigree (2,2,5,4,1)
- Methane, fossil [air, unspecified]: 4.91461e-8 kg; lognormal variance with pedigree 0.0021, pedigree (2,2,5,4,1)
- NMVOC, non-methane volatile organic compounds [air, unspecified]: 1.62347e-6 kg; lognormal variance with pedigree 0.0021, pedigree (2,2,5,4,1)
- Nickel II [air, unspecified]: 1.68531e-10 kg; lognormal variance with pedigree 0.7015, pedigree (2,2,5,4,1)
- Nitrogen oxides [air, unspecified]: 0.000270312 kg; lognormal variance with pedigree 0.0021, pedigree (2,2,5,4,1)
- PAH, polycyclic aromatic hydrocarbons [air, unspecified]: 1.49763e-9 kg; lognormal variance with pedigree 0.7015, pedigree (2,2,5,4,1)
- Particulate Matter, < 2.5 um [air, unspecified]: 1.72686e-6 kg; lognormal variance with pedigree 0.0021, pedigree (2,2,5,4,1)
- Pentane [air, unspecified]: 1.19916e-9 kg; lognormal variance with pedigree 0.0021, pedigree (2,2,5,4,1)
- Propane [air, unspecified]: 1.99861e-9 kg; lognormal variance with pedigree 0.0021, pedigree (2,2,5,4,1)
- Selenium IV [air, unspecified]: 1.91513e-12 kg; lognormal variance with pedigree 0.7015, pedigree (2,2,5,4,1)
- Styrene [air, unspecified]: 1.11922e-8 kg; lognormal variance with pedigree 0.0021, pedigree (2,2,5,4,1)
- Sulfur dioxide [air, unspecified]: 3.122e-7 kg; lognormal variance with pedigree 0.0021, pedigree (2,2,5,4,1)
- Toluene [air, unspecified]: 1.99861e-10 kg; lognormal variance with pedigree 0.0021, pedigree (2,2,5,4,1)
- Zinc II [air, unspecified]: 3.32849e-8 kg; lognormal variance with pedigree 0.7015, pedigree (2,2,5,4,1)
- m-Xylene [air, unspecified]: 1.95864e-8 kg; lognormal variance with pedigree 0.0021, pedigree (2,2,5,4,1)
- o-Xylene [air, unspecified]: 7.99443e-9 kg; lognormal variance with pedigree 0.0021, pedigree (2,2,5,4,1)

## Sampling procedure
Literature data.

## Extrapolations
This dataset has been copied from an original dataset covering the geography RER. The uncertainty has been adjusted accordingly.
