# window frame production, poly vinyl chloride, U=1.6 W/m2K

Dataset: EcoSpold 2, unit process
Geography: RoW
Time period: 1996-01-01 to 2022-12-31
Technology level: current
Classification: EcoSpold01Categories: building components/windows
Classification: ISIC rev.4 ecoinvent: 2220:Manufacture of plastics products
Tags: ConvertedDataset
Scenario: Business-as-Usual
System model: Substitution, consequential, long-term
Generated by: Martin Lehmann
Published in: Kellenberger D. 2007
Database: ecoinvent
isCopyrightProtected: true
accessRestrictedTo: 1

## General comment
This dataset describes all the processes and material inputs needed to produce a plastic window frame with 1 m2 visible area. 1 m2 of visible plastic window frame weighs 94.5 kg.
[This dataset was already contained in the ecoinvent database version 2. It was not individually updated during the transfer to ecoinvent version 3. Life Cycle Impact Assessment results may still have changed, as they are affected by changes in the supply chain, i.e. in other datasets. This dataset was generated following the ecoinvent quality guidelines for version 2. It may have been subject to central changes described in the ecoinvent version 3 change report (http://www.ecoinvent.org/database/ecoinvent-version-3/reports-of-changes/), and the results of the central updates were reviewed extensively. The changes added e.g. consistent water flows and other information throughout the database. The documentation of this dataset can be found in the ecoinvent reports of version 2, which are still available via the ecoinvent website. The change report linked above covers all central changes that were made during the conversion process.]

## Included activities end
Included processes are injection moulding and extrusion of PVC, section bar rolling for steel fittings, section bar extrusion for aluminium parts, all the road transport at different production phases and the process heat waste.

## Geography
Window frames produced and sold in Switzerland and Germany.

## Technology
The dataset describes highly automated technology processes in window frame manufacturing.

## Reference product
- window frame, poly vinyl chloride, U=1.6 W/m2K: 1 m2; By-product classification allocatable product; CPC 36990: Articles of plastics n.e.c.
  production volume 2.67763 m2
  properties: carbon allocation 24.8766 kg, carbon content 0.263244, carbon content, fossil 0.263244, carbon content, non-fossil 0, dry mass 94.5 kg, heating value, net 753.76 MJ, price 107.404 EUR2005, water content 0, water in wet mass 0 kg, wet mass 94.5 kg

## Inputs from technosphere
- aluminium, cast alloy: 0.0174 kg; lognormal variance with pedigree 0.0126, pedigree (1,3,5,5,1)
  properties: dry mass 1 kg, wet mass 1 kg
- aluminium, wrought alloy: 1.1 kg; lognormal variance with pedigree 0.0126, pedigree (1,3,5,5,1)
  properties: dry mass 1 kg, wet mass 1 kg
- chemical, organic: 0.0287 kg; lognormal variance with pedigree 0.0126, pedigree (1,3,5,5,1)
  properties: carbon content, fossil 0.628, dry mass 1 kg, heating value, net 19.03 MJ, wet mass 1 kg
- copper, cathode: 0.00698 kg; lognormal variance with pedigree 0.0126, pedigree (1,3,5,5,1)
  properties: dry mass 1 kg, wet mass 1 kg
- electricity, medium voltage: 1.31512, 0.0492052, 0.625169, 10.8506, 0.911097, 0.0488342 kWh (6 suppliers, which the file names only by identifier); sum of these 13.8 kWh; lognormal variance with pedigree 0.0126, pedigree (1,3,5,5,1)
- extrusion, plastic pipes: 54.3 kg; lognormal variance with pedigree 0.0126, pedigree (1,3,5,5,1)
- injection moulding: 1.9 kg; lognormal variance with pedigree 0.0126, pedigree (1,3,5,5,1)
- metal working factory: 4.32e-8 unit; lognormal variance with pedigree 0.3146, pedigree (2,4,5,5,1)
- polyethylene, low density, granulate: 0.00578 kg; lognormal variance with pedigree 0.0126, pedigree (1,3,5,5,1)
  properties: carbon content, fossil 0.857143, dry mass 1 kg, heating value, net 42.47 MJ, wet mass 1 kg
- polypropylene, granulate: 0.219 kg; lognormal variance with pedigree 0.012, pedigree (1,1,5,5,1)
  properties: carbon content, fossil 0.857143, dry mass 1 kg, heating value, net 32.78 MJ, wet mass 1 kg
- polystyrene foam slab: 0.184 kg; lognormal variance with pedigree 0.0126, pedigree (1,3,5,5,1)
  properties: carbon content, fossil 0.859091, dry mass 1 kg, heating value, net 38.67 MJ, wet mass 1 kg
- polystyrene, high impact: 0.208 kg; lognormal variance with pedigree 0.0126, pedigree (1,3,5,5,1)
  properties: carbon content, fossil 0.923077, dry mass 1 kg, heating value, net 38.67 MJ, wet mass 1 kg
- polyvinylchloride, emulsion polymerised: 7.45534 kg; lognormal variance with pedigree 0.012, pedigree (1,1,5,5,1)
  properties: carbon content, fossil 0.387097, dry mass 1 kg, heating value, net 21.5 MJ, wet mass 1 kg
- polyvinylchloride, suspension polymerised: 50.9447 kg; lognormal variance with pedigree 0.012, pedigree (1,1,5,5,1)
  properties: carbon content, fossil 0.387097, dry mass 1 kg, heating value, net 21.5 MJ, wet mass 1 kg
- section bar extrusion, aluminium: 1.1 kg; lognormal variance with pedigree 0.0126, pedigree (1,3,5,5,1)
- section bar rolling, steel: 37.9 kg; lognormal variance with pedigree 0.012, pedigree (1,1,5,5,1)
- steel, low-alloyed, hot rolled: 30 kg; lognormal variance with pedigree 0.012, pedigree (1,1,5,5,1)
  properties: carbon content, fossil 0.005, dry mass 1 kg, wet mass 1 kg
- synthetic rubber: 0.798 kg; lognormal variance with pedigree 0.012, pedigree (1,1,5,5,1)
  properties: carbon content, fossil 0.871949, dry mass 1 kg, heating value, net 26.42 MJ, wet mass 1 kg
- zinc: 0.325 kg; lognormal variance with pedigree 0.0126, pedigree (1,3,5,5,1)
  properties: dry mass 1 kg, wet mass 1 kg
- zinc coat, coils: 2.11 m2; lognormal variance with pedigree 0.0126, pedigree (1,3,5,5,1)
- zinc coat, pieces: 0.463 m2; lognormal variance with pedigree 0.0126, pedigree (1,3,5,5,1)

## Sampling procedure
Company documentation, measurements

## Extrapolations
see Geography This dataset has been copied from an original dataset covering the geography RER. The uncertainty has been adjusted accordingly.

## Review by Rolf Frischknecht 2010-02-07
passed
