# titanium tetrachloride production

Dataset: EcoSpold 2, unit process
Geography: RoW
Time period: 2020-01-01 to 2024-12-31
Technology level: current
Classification: ISIC rev.4 ecoinvent: 2420:Manufacture of basic precious and other non-ferrous metals
Scenario: Business-as-Usual
System model: Substitution, consequential, long-term
Generated by: Gao Feng
Published in: Gao Feng 2018
Database: ecoinvent
isCopyrightProtected: true
accessRestrictedTo: 1

## General comment
This dataset refers to the average global production of 1 kg of titanium tetrachloride (TiCl4) from rutile.
TiCl4 is normally produced from rutile and in some cases from a mix of ilmenite concentrate, rutile and high-grade slag. The dataset is based on the publication from Gao et al (2018) and it has been approximated from the respective dataset from the geography CN.
Table 2 of the Gao et al (2018) publication, provides cradle-to-gate data for the production of 1 ton of Ti sponge. For this dataset, only the data provided in the column ''chlorination and refining'' in table 2 of the abovementioned publication were taken into account here, because the chlorination and refining process is the sole process for the production of TiCl4. The amount of high-grade titanium slag, which serves as the principal input for the production of TiCl4 has been estimated.
Reference:
Gao, F., Nie, Z., Yang, D., Sun, B., Liu, Y., Gong, X., & Wang, Z. (2018). Environmental impacts analysis of titanium sponge production using Kroll process in China. Journal of Cleaner Production, 174, 771-779. doi:https://doi.org/10.1016/j.jclepro.2017.09.240.

## Included activities start
The activity starts with the processing of synthetic rutile that contains approximately 95% TiO2.

## Included activities end
The activity ends with the production of titanium tetrachloride.

## Allocation
No allocation is applied.

## Geography
The dataset has been approximated from the respective dataset from CN. The data is assumed to be representative also of the global situation, since the Kroll process is the most common method for the production of titanium sponge.

## Technology
During the chlorination and refining process, rutile are mixed with petroleum coke and placed in a chlorination furnace between 1073 and 1173 K, resulting in the production of crude titanium tetrachloride (TiCl4). The crude TiCl4 is refined further with reaction of the process being: 2TiO2 + 4Cl2 + 3C -> 2TiCl4 + 2CO + CO2. Titanium tetrachloride is used for the production of the pure titanium metal (titanium sponge). The data are assumed to be valid on average for 5 years after the publication of that article.

## Time period
Data are considered representative of current production practices.

## Reference product
- titanium tetrachloride: 1 kg; By-product classification allocatable product; CPC 342: Basic inorganic chemicals n.e.c.
  production volume 2.61532e8 kg
  properties: carbon allocation 0 kg, carbon content 0, carbon content, fossil 0, carbon content, non-fossil 0, chlorine content 0.7476, dry mass 1 kg, price 1.1087 EUR2005, titanium content 0.2524, water content 0, water in wet mass 0 kg, wet mass 1 kg

## Inputs from technosphere
- basic oxygen furnace slag: -0.146332, -1.01452 kg (2 suppliers, which the file names only by identifier); sum of these -1.16085 kg; lognormal variance with pedigree 0.0052, pedigree (3,3,1,5,1)
  properties: aluminium content 0.0101034, calcium content 0.324525, dry mass 0.995 kg, iron content 0.182475, magnesium content 0.0350101, manganese content 0.0250783, oxygen content 0.329259, phosphorus content 0.0102096, silicon content 0.0600014, vanadium content 0.00554358, water content 0.00502513, wet mass 1 kg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
- chemical factory, organics: 4e-10 unit; lognormal variance with pedigree 0.3126, pedigree (3,3,1,5,3)
- chlorine, for reuse in titanium tetrachloride production: 0.338818 kg; lognormal variance with pedigree 0.0052, pedigree (3,3,1,5,1)
  properties: dry mass 1 kg, wet mass 1 kg
- chlorine, liquid: 0.340091, 0.0687312 kg (2 suppliers, which the file names only by identifier); sum of these 0.408822 kg; lognormal variance with pedigree 0.0052, pedigree (3,3,1,5,1)
  properties: dry mass 1 kg, wet mass 1 kg
- electricity, medium voltage: 0.0108021, 0.0122667, 0.000247012, 0.00117726, 0.00138234, 0.000358609, 0.0830662, 0.00277949, 0.136963, 0.0101336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 kWh (45 suppliers, which the file names only by identifier); sum of these 0.643517 kWh; lognormal variance with pedigree 0.0052, pedigree (3,3,1,5,1)
- heat, district or industrial, natural gas: 0.93158 MJ; lognormal variance with pedigree 0.0052, pedigree (3,3,1,5,1)
  properties: heating value, net 1 MJ
- heat, district or industrial, other than natural gas: 36.9171 MJ; lognormal variance with pedigree 0.0052, pedigree (3,3,1,5,1)
  properties: corresponding fuel use, propane, furnace >100kW 1.05263 MJ, heating value, net 1 MJ
- hydrochloric acid, without water, in 30% solution state: -0.0213869, -0.00450522 kg (2 suppliers, which the file names only by identifier); sum of these -0.0258921 kg; lognormal variance with pedigree 0.0052, pedigree (3,3,1,5,1)
  properties: dry mass 1 kg, heating value, net 3.32 MJ, price 0.127 EUR2005, wet mass 1 kg
- petroleum coke: 0.164286 kg; lognormal variance with pedigree 0.0052, pedigree (3,3,1,5,1)
  properties: carbon content, fossil 0.885, dry mass 1 kg, heating value, net 35 MJ, wet mass 1 kg
- rutile, 95% titanium dioxide: 0.443158 kg; lognormal variance with pedigree 0.0052, pedigree (3,3,1,5,1)
  properties: dry mass 1 kg, wet mass 1 kg
- sodium hydroxide, without water, in 50% solution state: 1.14067 kg; lognormal variance with pedigree 0.0052, pedigree (3,3,1,5,1)
  properties: dry mass 1 kg, heating value, net 3.03 MJ, wet mass 1 kg
- tap water: 0.111038 kg; lognormal variance with pedigree 0.0052, pedigree (3,3,1,5,1)
  properties: carbon content, fossil 0.00178991, dry mass 0.000337476 kg, water content 2962.17, wet mass 1 kg
- wastewater from pig iron production: -8.92403e-5, -2.12635e-5, -5.34383e-7 m3 (3 suppliers, which the file names only by identifier); sum of these -0.000111038 m3; lognormal variance with pedigree 6.003, pedigree (1,3,1,5,1)
  properties: carbon content, fossil 1.2149e-5, dry mass 0.337476 kg, water content 2962.17, wet mass 1000 kg

## Emissions to nature
- Carbon dioxide, fossil [air, non-urban air or from high stacks]: 0.11601 kg; lognormal variance with pedigree 0.0052, pedigree (3,3,1,5,1)
- Carbon monoxide, fossil [air, non-urban air or from high stacks]: 0.147671 kg; lognormal variance with pedigree 0.6546, pedigree (3,3,1,5,1)

## Sampling procedure
The individual exchanges have been taken from the column ''chlorination and refining'' of table 2 of Gao et al. (2018).

Special attention was given to the chlorine input due to the fact that part of the chlorine is recycled from the electrolysis of magnesium chloride (MgCl2 -> Mg + Cl2), which is produced during the titanium sponge production. The rest of the chlorine is obtained from an external source, which is assumed to be brought to the site in liquid form.

The fuels (raw coal, natural gas and crude oil) have been linked with the respective ecoinvent heat production datasets (check exchange comments). Calculation of the thermal energy is also available in the respective comments. The individual emissions listed in table 2 (CO2, SO2, NOx, CO, CH4, N2O, NMVOC, As, Cd, Cr, Hg, Ni, Pb, V, Zn and Particulates) are not considered here because they represent indirect emissions from heat (from natural gas, crude oil and hard coal) and electricity production that are already modelled in the energy production datasets. Therefore, those emissions are not included in order to avoid double counting.

However, the direct carbon monoxide & dioxide emissions are included here based on the stoichiometric equations of the chlorination and refining process (more information on exchange comment section of each emission), as these are direct process emissions. Non-carbon emissions from the burning of petroleum coke have not been taken into consideration, therefore the emission profile resulting from the burning of coke is not fully included.

The calculation of rutile is based on the stoichiometric equation: 2TiO2 + 4Cl2 + 3C -> 2TiCl4 + 2CO + CO2 (for more info consult the respective exchange comment).

Finally, the spent alkali liquor produced as a byproduct according to Gao et al (2018) has been approximated as blast furnace slag. This approximation is based on the work of Xiong et al (2010), that describes the production of TiCl4 from titanium slag in the Panzhihua city (as in the publication from Gao et al 2018), where the main output from the carbochlorination process seems to be furnace slag (Xiong et al. 2010).

References:
Gao, F., Nie, Z., Yang, D., Sun, B., Liu, Y., Gong, X., & Wang, Z. (2018). Environmental impacts analysis of titanium sponge production using Kroll process in China. Journal of Cleaner Production, 174, 771-779. doi:https://doi.org/10.1016/j.jclepro.2017.09.240.

Liao, W., Heijungs, R., & Huppes, G. (2012). Thermodynamic resource indicators in LCA: a case study on the titania produced in Panzhihua city, southwest China. The International Journal of Life Cycle Assessment, 17(8), 951-961. doi:10.1007/s11367-012-0429-4

Xiong, S.-f., Yuan, Z.-f., Xu, C., & Xi, L. (2010). Composition of off-gas produced by combined fluidized bed chlorination for preparation of TiCl4. Transactions of Nonferrous Metals Society of China, 20(1), 128-134. doi:https://doi.org/10.1016/S1003-6326(09)60109-6

## Extrapolations
This dataset has been extrapolated from the respective dataset from CN. The uncertainty has been adjusted accordingly. According to the authors of the publication used as a source for this dataset, data were collected from titanium sponge manufacturing companies in the province of Sichuan and Shaanxi through surveys, but considering at the same time average national production statistics. Therefore, the data are assumed to represent the average production of titanium metal in China through the Kroll process, and are assumed to be also representative of the average global production conditions.
