# process-specific burdens, inert material landfill

Dataset: EcoSpold 2, unit process
Geography: RoW
Time period: 1995-01-01 to 2022-12-31
Technology level: current
Classification: EcoSpold01Categories: waste management/inert material landfill
Classification: ISIC rev.4 ecoinvent: 3821:Treatment and disposal of non-hazardous waste
Synonyms: cleanfill
Tags: ConvertedDataset
Scenario: Business-as-Usual
System model: Substitution, consequential, long-term
Generated by: Gabor Doka (obsolete)
Published in: Doka G. 2007
Database: ecoinvent
isCopyrightProtected: true
accessRestrictedTo: 1

## General comment
landfill for inert, insoluble, largely unpolluted, mostly mineral wastes like bricks, concrete, excavation material with carbon content below 5%
[This dataset was already contained in the ecoinvent database version 2. It was not individually updated during the transfer to ecoinvent version 3. Life Cycle Impact Assessment results may still have changed, as they are affected by changes in the supply chain, i.e. in other datasets. This dataset was generated following the ecoinvent quality guidelines for version 2. It may have been subject to central changes described in the ecoinvent version 3 change report (http://www.ecoinvent.org/database/ecoinvent-version-3/reports-of-changes/), and the results of the central updates were reviewed extensively. The changes added e.g. consistent water flows and other information throughout the database. The documentation of this dataset can be found in the ecoinvent reports of version 2, which are still available via the ecoinvent website. The change report linked above covers all central changes that were made during the conversion process.]

## Included activities end
process-specific (i.e. independent of waste composition) energy demand and land use of landfill

## Geography
Specific to the technology encountered in Switzerland in 2000.

## Technology
50% of the sites feature a base seal and leachate collection system. landfill with renaturation after closure.

## Reference product
- process-specific burdens, inert material landfill: 1 kg; By-product classification allocatable product; CPC 39: Wastes or scraps
  production volume 3.96633 kg
  properties: carbon allocation 0 kg, carbon content 0, price 0.000523272 EUR2005

## Inputs from technosphere
- diesel, burned in building machine: 0.027 MJ; lognormal variance with pedigree 0.0252, pedigree (2,3,5,5,1)
  properties: heating value, net 1 MJ
- electricity, low voltage: 5.09124e-7, 1.85081e-7, 3.78532e-8, 1.50582e-7, 1.08562e-6, 1.0107e-6, 9.0625e-6, 1.25854e-6 kWh (8 suppliers, which the file names only by identifier); sum of these 1.33e-5 kWh; lognormal variance with pedigree 0.0252, pedigree (2,3,5,5,1)
- heat, central or small-scale, other than natural gas: 0.00134133, 2.86761e-6 MJ (2 suppliers, which the file names only by identifier); sum of these 0.0013442 MJ; lognormal variance with pedigree 0.0252, pedigree (2,3,5,5,1)
  properties: heating value, net 1 MJ

## Inputs from nature
- Occupation, construction site [natural resource, land]: 4.44e-5 m2*year; lognormal variance with pedigree 0.0552, pedigree (2,3,5,5,1)
- Occupation, dump site [natural resource, land]: 0.000444 m2*year; lognormal variance with pedigree 0.0552, pedigree (2,3,5,5,1)
- Occupation, shrub land, sclerophyllous [natural resource, land]: 0.000222 m2*year; lognormal variance with pedigree 0.0552, pedigree (2,3,5,5,1)
- Transformation, from dump site, inert material landfill [natural resource, land]: 4.44e-5 m2; lognormal variance with pedigree 0.1452, pedigree (2,3,5,5,1)
- Transformation, from pasture, man made [natural resource, land]: 4.44e-5 m2; lognormal variance with pedigree 0.1452, pedigree (2,3,5,5,1)
- Transformation, from shrub land, sclerophyllous [natural resource, land]: 4.44e-5 m2; lognormal variance with pedigree 0.1452, pedigree (2,3,5,5,1)
- Transformation, to dump site, inert material landfill [natural resource, land]: 4.44e-5 m2; lognormal variance with pedigree 0.1452, pedigree (2,3,5,5,1)
- Transformation, to forest, unspecified [natural resource, land]: 4.44e-5 m2; lognormal variance with pedigree 0.1452, pedigree (2,3,5,5,1)
- Transformation, to shrub land, sclerophyllous [natural resource, land]: 4.44e-5 m2; lognormal variance with pedigree 0.1452, pedigree (2,3,5,5,1)

## Sampling procedure
data from one literature source on sanitary landfill, adapted to features of this landfill type

## Extrapolations
assumed 50% with base seal and 50% without This dataset has been copied from an original dataset covering the geography CH. The uncertainty has been adjusted accordingly.

## Review by Niels Jungbluth 2003-06-18
Passed.
