# carrot seed production, for sowing

Dataset: EcoSpold 2, unit process
Geography: RoW
Time period: 1999-01-01 to 2022-12-31
Technology level: current
Classification: ISIC rev.4 ecoinvent: 0164:Seed processing for propagation
Tags: WFLDB
Scenario: Business-as-Usual
System model: Substitution, consequential, long-term
Generated by: [System]
Database: ecoinvent
isCopyrightProtected: true
accessRestrictedTo: 1

## General comment
This global dataset is a copy of the regional CH dataset, except for the following modifications.
The production volume represents the global annual production.
The geographicalCorrelation score of every pedigree matrix of was changed to '5'.
The comments below were part of the CH regional dataset.
This dataset represents the production of 1 kg of carrot seed (fresh weight), with a maximum water content of 10%, at the regional storehouse.
This process is identical to the ecoinvent process 'grass seed production, Swiss integrated production, for sowing' which is used as a proxy for carrot seed production at regional storehouse. This dataset refers to an average situation; for specific situations exchanges might differ substantially due to site specific parameters

## Included activities start
From the sowing of carrot seeds in order to plant the carrot field from where carrot seeds will be harvested.

## Included activities end
The seed produced at the farm is transported to the processing centre, treated (pre-cleaning, cleaning, eventually drying, chemical dressing (for integrated production) and bag filling, stored and afterwards transported to the regional storage centre. No data on wastewater production were available.

## Technology
Integrated production

## Time period
Time period referring to the data source: 1999-2002. Based on expert opinion data is considered to be valid at least up to 2012.

## Reference product
- carrot seed, for sowing: 1 kg; By-product classification allocatable product; CPC 86112: Seed processing services
  production volume 3.12665e6 kg
  properties: carbon allocation 0.491495 kg, carbon content 0.523, carbon content, fossil 0, carbon content, non-fossil 0.523, dry mass 0.939761 kg, price 0.381154 EUR2005, water content 0.0641, water in wet mass 0.0602387 kg, wet mass 1 kg

## Inputs from technosphere
- building, multi-storey: 2e-5 m3; lognormal variance with pedigree 1.39354, pedigree (5,3,4,5,1)
- carrot seed, Swiss integrated production, at farm: 1 kg; lognormal variance with pedigree 0.0413412, pedigree (1,1,4,5,3)
  properties: carbon content, non-fossil 0.523, dry mass 0.939761 kg, water content 0.0641, wet mass 1 kg
- electricity, low voltage: 0.00222024, 0.00080712, 0.000165074, 0.000656674, 0.00473427, 0.00440755, 0.0395207, 0.00548838 kWh (8 suppliers, which the file names only by identifier); sum of these 0.058 kWh; lognormal variance with pedigree 0.430903, pedigree (5,5,5,5,5)

## Inputs from nature
- Occupation, construction site [natural resource, land]: 8e-6 m2*year; lognormal variance with pedigree 0.386118, pedigree (5,3,4,5,1)
- Occupation, industrial area [natural resource, land]: 0.0002 m2*year; lognormal variance with pedigree 0.386118, pedigree (5,3,4,5,1)
- Transformation, from unspecified [natural resource, land]: 4e-6 m2; lognormal variance with pedigree 0.66229, pedigree (5,3,4,5,1)
- Transformation, to industrial area [natural resource, land]: 4e-6 m2; lognormal variance with pedigree 0.66229, pedigree (5,3,4,5,1)

## Sampling procedure
Data were compiled from statistics, fertilising recommendations, documents from extension services and expert knowledge.

## Extrapolations
The amount of the exchanges are copy from a regional dataset.
