# cathode production, NMC811, for Li-ion battery

Dataset: EcoSpold 2, unit process
Geography: RoW
Time period: 2017-01-01 to 2022-12-31
Technology level: current
Classification: ISIC rev.4 ecoinvent: 2720:Manufacture of batteries and accumulators
Synonyms: nickel-manganese-cobalt 811 cathode
Scenario: Business-as-Usual
System model: Substitution, consequential, long-term
Generated by: Eleonora Crenna
Published in: Dai, Q. 2017
Database: ecoinvent
isCopyrightProtected: true
accessRestrictedTo: 1

## General comment
This dataset represents the production of 1 kg nickel manganese cobalt (NMC) cathode for Li-ion batteries, with nickel manganese and cobalt in ratio 8:1:1 (NMC811). Data are based on literature and expert judgement. For infrastructure, the ecoinvent dataset "chemical factory, organics" is accounted. This dataset is a copy of the corresponding regional dataset. Production volume was adjusted.

## Included activities start
The activity starts when NMC811 oxide and other materials enter the process at the factory.

## Included activities end
The activity ends with the production of NMC811 cathode at factory gate.

## Geography
The demand of energy in this dataset come from large-scale industrial production companies located in China and are assumed to be representative of the production of NMC811 cathode in China. The data are considered representative of the average global situation.

## Technology
The positive electrode is made of a transition metal oxide (Li-NMC oxide), a conductive additive (carbon black) and a polymer binder (polyvinylidene fluoride, PVDF) mixed in ratio 95:2.5:2.5. The solvent N-methyl-2-pyrrolidone (NMP) is used to prepare the cathode slurry. The input materials are mixed to form a slurry, then the mixture is dried with the solvent evaporating away, cut and calendered to form the cathode of a Li-ion battery. The energy required to coat the aluminium conductor foil with the cathode slurry is included in this dataset, because it was not possible to separate it from the energy required for the drying step.

## Time period
The time period is from 2017 (year of the publication of data) and 2020 (year of the dataset)

## Reference product
- cathode, NMC811, for Li-ion battery: 1 kg; By-product classification allocatable product; CPC 46430: Parts of primary cells, primary batteries and electric accumulators (including separators)
  production volume 1.5209e7 kg
  properties: carbon allocation 0.0342935 kg, carbon content 0.0342935, carbon content, fossil 0.0342935, carbon content, non-fossil 0, dry mass 1 kg, price 18.8989 EUR2005, water content 0, water in wet mass 0 kg, wet mass 1 kg

## Inputs from technosphere
- N-methyl-2-pyrrolidone: 0.0056 kg; lognormal variance with pedigree 0.0058, pedigree (2,4,2,5,2)
  properties: carbon content, fossil 0.585366, dry mass 1 kg, heating value, net 29.36 MJ, wet mass 1 kg
- NMC811 oxide: 0.95 kg; lognormal variance with pedigree 0.0038, pedigree (3,3,2,1,2)
  properties: dry mass 1 kg, wet mass 1 kg
- carbon black: 0.025 kg; lognormal variance with pedigree 0.0058, pedigree (3,3,2,5,2)
  properties: carbon content, fossil 0.85, dry mass 1 kg, heating value, net 25.76 MJ, wet mass 1 kg
- chemical factory, organics: 4e-10 unit; lognormal variance with pedigree 0.3582, pedigree (5,5,3,5,3)
- electricity, medium voltage: 0.00760366, 0.0144494, 0.00863463, 0.000173874, 0.000828684, 0.000973038, 0.000252428, 0.0584709, 0.00195651, 0.0964089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 kWh (46 suppliers, which the file names only by identifier); sum of these 0.467426 kWh; lognormal variance with pedigree 0.0132, pedigree (3,3,2,5,3)
- heat, district or industrial, natural gas: 28.0737 MJ; lognormal variance with pedigree 0.0058, pedigree (3,3,2,5,2)
  properties: heating value, net 1 MJ
- polyvinylfluoride: 0.025 kg; lognormal variance with pedigree 0.0058, pedigree (3,3,2,5,2)
  properties: carbon content, fossil 0.521739, dry mass 1 kg, heating value, net 23.7 MJ, wet mass 1 kg

## Emissions to nature
- N-methyl-2-pyrrolidone [air, unspecified]: 0.0056 kg; lognormal variance with pedigree 0.0452, pedigree (2,4,2,5,2)

## Sampling procedure
From Literature and expert judgement.

## Extrapolations
The dataset is extrapolated from CN data; the uncertainty has been adjusted accordingly.
