# ethoxylated alcohol (AE>20) production, palm oil

Dataset: EcoSpold 2, unit process
Geography: RoW
Time period: 2015-01-01 to 2022-12-31
Technology level: current
Classification: ISIC rev.4 ecoinvent: 2023:Manufacture of soap and detergents, cleaning and polishing preparations, pe
Synonyms: non-ionic surfactants
Scenario: Business-as-Usual
System model: Substitution, consequential, long-term
Share of production covered: 40 %
Generated by: Lucia Valsasina
Database: ecoinvent
isCopyrightProtected: true
accessRestrictedTo: 1

## General comment
This dataset represents the production of 1 kg of ethoxylated alcohol with eleven polyether units (AE21) from C16-C18 fatty alcohol. Ethoxylated alcohols are non-ionic surfactants produced from the reaction of ethylene oxide and alcohol.
Ethoxilated alcohols are mainly used to produce detergents, in the cosmetic industry, in agricultural and textile products, and they can also be used in paints. Because of their structural variety, AE have very different physical and chemical properties. In comparison with other tensides like anionic surfactants, alcohol ethoxylates exhibit a better fat soil removal capacity, especially at low temperatures.
Reference:
Zah R., Hischier R. (2007) Life Cycle Inventories of Detergents. ecoinvent report No. 12. Swiss Centre for Life Cycle Inventories, Dübendorf, 2007.
For more information on the model please refer to the dedicate ecoinvent report, access it in the Report section of ecoQuery (http://www.ecoinvent.org/login-databases.html)

## Included activities start
From reception of fatty alcohol , ethylene oxide, and nitrogen at the factory gate.

## Included activities end
This activity ends with 1 kg of ethoxylated alcohol (AE21). The dataset includes material and energy input, transport, infrastructure, production of waste and emissions to water and air. The datset doesn't include water consumption.

## Geography
Data based on the European ethoxylated alcohols production

## Technology
Alcohol ethoxylates (AE) are produced by the reaction of fatty alcohols with ethylene oxide leading to a condensation of polyethylene glycolether groups on the alcohol chains. The fatty alcohols can be derived from petrochemical, palm kernel, or coconut oil. The reaction takes place at temperatures ranging from 150°C to 200°C. The grade of ethoxylation, e.g. the specific number of polyether units condensed to the alcohol chains, is controlled by the concentration of ethylene oxide in the ethoxylation process.
This is an average technology for the production of AE representing typical European production mix in the mid 90s.
Reference:
Schul W. (1995) A Life-Cycle Inventory for the Production of Detergent Range Alcohol Ethoxylates in Europe. In: Tenside, Surfactants, Detergents, 32(2), pp. 171-192.
Stalmans M., Berenbold H., Berna J. L., Cavalli L., Dillarstone A., Franke M., Hirsinger F., Janzen D., Kosswig K., Postlethwaite D., Rappert T., Renta C., Scharer D., Schick K.-P., Schul W., Thomas H. and Sloten R. V. (1995) European Life-Cycle Inventory for Detergent Surfactants Production. In: Tenside, Surfactants, Detergents, 32(2), pp. 84-109

## Time period
data of published literature

## Reference product
- ethoxylated alcohol (AE>20): 1 kg; By-product classification allocatable product; CPC 35310: Organic surface active agents, except soap
  production volume 1.1977e6 kg
  properties: carbon allocation 0.527 kg, carbon content 0.527, carbon content, fossil 0, carbon content, non-fossil 0.527, dry mass 1 kg, heating value, net 29.26 MJ, price 1.48031 EUR2005, water content 0, water in wet mass 0 kg, wet mass 1 kg

## Inputs from technosphere
- chemical factory, organics: 4e-10 unit; lognormal variance with pedigree 0.309225, pedigree (2,3,2,2,3)
- electricity, medium voltage: 0.00594661, 0.000222493, 0.00282685, 0.0490635, 0.00411974, 0.000220816 kWh (6 suppliers, which the file names only by identifier); sum of these 0.0624 kWh; lognormal variance with pedigree 0.009825, pedigree (2,3,2,2,3)
- ethylene oxide: 0.92505 kg; lognormal variance with pedigree 0.009825, pedigree (2,3,2,2,3)
  properties: carbon content, fossil 0.545455, dry mass 1 kg, heating value, net 27.53 MJ, wet mass 1 kg
- fatty alcohol: 0.186334 kg; lognormal variance with pedigree 0.009825, pedigree (2,3,2,2,3)
  properties: carbon content, fossil 0.0408973, carbon content, non-fossil 0.743434, dry mass 1 kg, heating value, net 41.01 MJ, wet mass 1 kg
- heat, from steam, in chemical industry: 0.7 MJ; lognormal variance with pedigree 0.009825, pedigree (2,3,2,2,3)
  properties: heating value, net 1 MJ
- nitrogen, liquid: 0.019 kg; lognormal variance with pedigree 0.009825, pedigree (2,3,2,2,3)
  properties: dry mass 1 kg, wet mass 1 kg

## Emissions to nature
- Aldehydes, unspecified [air, urban air close to ground]: 1.19e-5 kg; lognormal variance with pedigree 0.0104, pedigree (2,3,2,4,3)
- Carbon dioxide, fossil [air, urban air close to ground]: 0.0108 kg; lognormal variance with pedigree 0.0104, pedigree (2,3,2,4,3)
- Carbon dioxide, non-fossil [air, urban air close to ground]: 0.223 kg; lognormal variance with pedigree 0.0104, pedigree (2,3,2,4,3)
- Carbon monoxide, fossil [air, urban air close to ground]: 3.25e-5 kg; lognormal variance with pedigree 0.0104, pedigree (2,3,2,4,3)
- Methane, fossil [air, urban air close to ground]: 0.00782 kg; lognormal variance with pedigree 0.0104, pedigree (2,3,2,4,3)
- NMVOC, non-methane volatile organic compounds [air, urban air close to ground]: 0.00303 kg; lognormal variance with pedigree 0.0104, pedigree (2,3,2,4,3)
- Nitrogen oxides [air, urban air close to ground]: 0.000115 kg; lognormal variance with pedigree 0.0104, pedigree (2,3,2,4,3)
- Particulate Matter, > 10 um [air, urban air close to ground]: 0.00108 kg; lognormal variance with pedigree 0.0104, pedigree (2,3,2,4,3)
- Sulfur dioxide [air, urban air close to ground]: 0.000374 kg; lognormal variance with pedigree 0.0104, pedigree (2,3,2,4,3)
- Acidity, unspecified [water, surface water]: 4.4e-7 kg; lognormal variance with pedigree 0.0104, pedigree (2,3,2,4,3)
- Ammonium [water, surface water]: 1.52e-9 kg; lognormal variance with pedigree 0.0104, pedigree (2,3,2,4,3)
- BOD5, Biological Oxygen Demand [water, unspecified]: 3.43166e-5 kg; lognormal variance with pedigree 0.218, pedigree (4,5,5,5,5)
- COD, Chemical Oxygen Demand [water, unspecified]: 3.43166e-5 kg; lognormal variance with pedigree 0.218, pedigree (4,5,5,5,5)
- Chromium III [water, surface water]: 7.24e-7 kg; lognormal variance with pedigree 0.0104, pedigree (2,3,2,4,3)
- DOC, Dissolved Organic Carbon [water, unspecified]: 9.45177e-6 kg; lognormal variance with pedigree 0.218, pedigree (4,5,5,5,5)
- Dissolved solids [water, surface water]: 0.00167 kg; lognormal variance with pedigree 0.0104, pedigree (2,3,2,4,3)
- Hydrocarbons, unspecified [water, surface water]: 5.68e-8 kg; lognormal variance with pedigree 0.0104, pedigree (2,3,2,4,3)
- Iron ion [water, surface water]: 6.15e-9 kg; lognormal variance with pedigree 0.0104, pedigree (2,3,2,4,3)
- Nitrogen [water, surface water]: 3.28e-5 kg; lognormal variance with pedigree 0.0104, pedigree (2,3,2,4,3)
- Oils, unspecified [water, surface water]: 1.23e-5 kg; lognormal variance with pedigree 0.0104, pedigree (2,3,2,4,3)
- Phenol [water, surface water]: 9.47e-10 kg; lognormal variance with pedigree 0.0104, pedigree (2,3,2,4,3)
- Suspended solids, unspecified [water, surface water]: 0.000214 kg; lognormal variance with pedigree 0.0104, pedigree (2,3,2,4,3)
- TOC, Total Organic Carbon [water, unspecified]: 9.45177e-6 kg; lognormal variance with pedigree 0.218, pedigree (4,5,5,5,5)
- Zinc II [water, surface water]: 1.79e-7 kg; lognormal variance with pedigree 0.0104, pedigree (2,3,2,4,3)

## Sampling procedure
data out of ECOSOL study of European Surfactant Industry. Common translation rules used, reported in Chemical report (Althaus et al. 2003).

## Extrapolations
This dataset is extrapolated from the european dataset. The uncertainty has been adjusted accordingly.

## Review by Emilia Moreno Ruiz 2017-08-09
This dataset was additionally reviewed in a separate review process by Eric Johnson of Atlantic Consulting as well as Emilia Moreno Ruiz and Gregor Wernet of ecoinvent.
