# pea seed production, for sowing

Dataset: EcoSpold 2, unit process
Geography: RoW
Time period: 1999-01-01 to 2022-12-31
Technology level: current
Classification: ISIC rev.4 ecoinvent: 0164:Seed processing for propagation
Classification: EcoSpold01Categories: agricultural means of production/seed
Scenario: Business-as-Usual
System model: Substitution, consequential, long-term
Share of production covered: 0 %
Generated by: Thomas Nemecek
Published in: Nemecek, T. 2007
Database: ecoinvent
isCopyrightProtected: true
accessRestrictedTo: 1

## General comment
Refers to 1 kg of pea seed (fresh weight), with a maximum water content of 13%
[This dataset was already contained in the ecoinvent database version 2. It was not individually updated during the transfer to ecoinvent version 3. Life Cycle Impact Assessment results may still have changed, as they are affected by changes in the supply chain, i.e. in other datasets. This dataset was generated following the ecoinvent quality guidelines for version 2. It may have been subject to central changes described in the ecoinvent version 3 change report (http://www.ecoinvent.org/database/ecoinvent-version-3/reports-of-changes/), and the results of the central updates were reviewed extensively. The changes added e.g. consistent water flows and other information throughout the database. The documentation of this dataset can be found in the ecoinvent reports of version 2, which are still available via the ecoinvent website. The change report linked above covers all central changes that were made during the conversion process.]

## Included activities start
This activity start after the harvest of the crop.

## Included activities end
The seed produced at the farm is treated in the processing centre (pre-cleaning, cleaning, eventually drying, chemical dressing (for integrated production) and bag filling), stored and afterwards transported to the regional storage centre. No data on wastewater production were available.

## Technology
Refers to average seed processing

## Time period
Date of the major data sources.

## Reference product
- pea seed, for sowing: 1 kg; By-product classification allocatable product; CPC 01260: Vegetable seeds, except beet seeds
  production volume 8.61452e8 kg
  properties: carbon allocation 0.408396 kg, carbon content 0.469421, carbon content, fossil 0, carbon content, non-fossil 0.469421, dry mass 0.87 kg, energy content 16.078 MJ, price 2.13295 EUR2005, water content 0.149425, water in wet mass 0.13 kg, wet mass 1 kg

## Inputs from technosphere
- building, multi-storey: 2e-5 m3; lognormal variance with pedigree 0.3726, pedigree (5,3,5,5,1)
- electricity, low voltage: 0.00222024, 0.00080712, 0.000165074, 0.000656674, 0.00473427, 0.00440755, 0.0395207, 0.00548838 kWh (8 suppliers, which the file names only by identifier); sum of these 0.058 kWh; lognormal variance with pedigree 0.0906, pedigree (5,3,5,5,1)
- packaging, for pesticides: 0.0032 kg; lognormal variance with pedigree 0.0512, pedigree (4,3,5,5,4)
  properties: carbon content, fossil 0.85714, dry mass 1 kg, heating value, net 25.97 MJ, price 0.0642 EUR2005, wet mass 1 kg
- pesticide, unspecified: 0.0016 kg; lognormal variance with pedigree 0.0127, pedigree (2,2,5,5,1)
  properties: carbon content, fossil 0.486978, dry mass 1 kg, wet mass 1 kg
- protein pea: 1 kg; lognormal variance with pedigree 0.02, pedigree (1,1,5,5,3)
  properties: carbon content, non-fossil 0.469421, dry mass 0.87 kg, water content 0.149425, wet mass 1 kg

## Inputs from nature
- Occupation, construction site [natural resource, land]: 8e-6 m2*year; lognormal variance with pedigree 0.1226, pedigree (5,3,5,5,1)
- Occupation, industrial area [natural resource, land]: 0.0002 m2*year; lognormal variance with pedigree 0.1226, pedigree (5,3,5,5,1)
- Transformation, from unspecified [natural resource, land]: 4e-6 m2; lognormal variance with pedigree 0.1826, pedigree (5,3,5,5,1)
- Transformation, to industrial area [natural resource, land]: 4e-6 m2; lognormal variance with pedigree 0.1826, pedigree (5,3,5,5,1)

## Sampling procedure
Data based on a literature, expert information and enquiry of seed processing plants.

## Extrapolations
Production of imported seed is approximated by seed produced in Switzerland. This dataset has been copied from an original dataset covering the geography CH. The uncertainty has been adjusted accordingly.

## Review by Roland Hischier 2003-06-03
Passed.

## Review by Bo Weidema 2012-01-19
passed
