# extrusion, plastic film

Dataset: EcoSpold 2, unit process
Geography: CA-QC
Time period: 1993-01-01 to 2022-12-31
Technology level: current
Classification: ISIC rev.4 ecoinvent: 2220:Manufacture of plastics products
Classification: EcoSpold01Categories: plastics/processing
Tags: recontextualization
Scenario: Business-as-Usual
System model: Substitution, consequential, long-term
Generated by: Pascal Lesage
Published in: Hischier R. 2007
Database: ecoinvent
isCopyrightProtected: true
accessRestrictedTo: 1

## General comment
1 kg of this process equals 0.976 kg of extruded plastic film.
[This dataset was already contained in the ecoinvent database version 2. It was not individually updated during the transfer to ecoinvent version 3. Life Cycle Impact Assessment results may still have changed, as they are affected by changes in the supply chain, i.e. in other datasets. This dataset was generated following the ecoinvent quality guidelines for version 2. It may have been subject to central changes described in the ecoinvent version 3 change report (http://www.ecoinvent.org/database/ecoinvent-version-3/reports-of-changes/), and the results of the central updates were reviewed extensively. The changes added e.g. consistent water flows and other information throughout the database. The documentation of this dataset can be found in the ecoinvent reports of version 2, which are still available via the ecoinvent website. The change report linked above covers all central changes that were made during the conversion process.]

## Included activities end
This process contains the auxillaries and energy demand for the mentioned convertion process of plastics. The converted amount of plastics is NOT included into the dataset.

## Geography
information from different European and Swiss converting companies

## Technology
present technologies

## Time period
time to which data refer

## Parameters
- Quebec gross domestic product 2011: 3.11e11 USD(2011); name quebecGDP2011; lognormal variance with pedigree 0.0006, pedigree (1,1,1,1,1)
  Quebec Gross domestic product for 2011, expressed in 2011 USD. Source: Institut de la statistique du Québec. Converted from CAD to USD using a yearly average exchange rate of 0.989 CAD/USD (Source: bank of Canada)
- fraction, cooling water, cooling pond system, to air: 0.032 dimensionless; lognormal variance with pedigree 0.0413, pedigree (2,3,1,3,1)
- fraction, cooling water, once-through system, to air: 0.004 dimensionless; lognormal variance with pedigree 0.0413, pedigree (2,3,1,3,1)
- fraction, cooling water, recirculating system, to air: 0.771 dimensionless; lognormal variance with pedigree 0.0413, pedigree (2,3,1,3,1)
- fraction, cooling water, to air: 0.3875 dimensionless; lognormal variance with pedigree 0.092025, pedigree (4,4,3,2,4)
- world gross domestic product 2011: 7e13 USD(2011); name worldGDP2011; lognormal variance with pedigree 0.0006, pedigree (1,1,1,1,1)
  World Gross domestic product for 2011, expressed in 2011 USD. Source: World Bank

## Reference product
- extrusion, plastic film: 1 kg; By-product classification allocatable product; CPC 89200: Moulding, pressing, stamping, extruding and similar plastic manufacturing services
  production volume 0.0177714 kg
  properties: carbon allocation 0 kg, carbon content 0, price 0.153387 EUR2005

## Inputs from technosphere
- EUR-flat pallet: 0.00144 unit; lognormal variance with pedigree 0.0214, pedigree (2,3,5,5,3)
  properties: carbon content, fossil 0.0311351, carbon content, non-fossil 0.58833, dry mass 18.3333 kg, heating value, net 335.11 MJ, water content 0.2, wet mass 22 kg
- core board: 0.00732 kg; lognormal variance with pedigree 0.0214, pedigree (2,3,5,5,3)
  properties: carbon content, non-fossil 0.430314, dry mass 0.945 kg, heating value, net 12.19 MJ, water content 0.0582011, wet mass 1 kg
- electricity, medium voltage: 0.66 kWh; lognormal variance with pedigree 0.0214, pedigree (2,3,5,5,3)
- heat, district or industrial, natural gas: 0.601 MJ; lognormal variance with pedigree 0.0214, pedigree (2,3,5,5,3)
  properties: heating value, net 1 MJ
- heat, district or industrial, other than natural gas: 0.2091 MJ; lognormal variance with pedigree 0.0214, pedigree (2,3,5,5,3)
  properties: heating value, net 1 MJ
- lubricating oil: 0.000105 kg; lognormal variance with pedigree 0.0214, pedigree (2,3,5,5,3)
  properties: carbon content, fossil 0.75, dry mass 1 kg, heating value, net 40.2 MJ, wet mass 1 kg
- packaging box factory: 1.4e-9 unit; lognormal variance with pedigree 0.448, pedigree (4,5,5,5,5)
- particleboard, uncoated: 2.15e-5 m3; lognormal variance with pedigree 0.0214, pedigree (2,3,5,5,3)
  properties: carbon content, fossil 0.045339, carbon content, non-fossil 0.4416, dry mass 599.3 kg, heating value, net 8749.71 MJ, water content 0.0629067, wet mass 637 kg
- polyethylene, low density, granulate: 0.00215 kg; lognormal variance with pedigree 0.0214, pedigree (2,3,5,5,3)
  properties: carbon content, fossil 0.857143, dry mass 1 kg, heating value, net 42.47 MJ, wet mass 1 kg
- polypropylene, granulate: 0.000683 kg; lognormal variance with pedigree 0.0214, pedigree (2,3,5,5,3)
  properties: carbon content, fossil 0.857143, dry mass 1 kg, heating value, net 32.78 MJ, wet mass 1 kg
- polyvinylchloride, suspension polymerised: 4.88e-5 kg; lognormal variance with pedigree 0.0214, pedigree (2,3,5,5,3)
  properties: carbon content, fossil 0.387097, dry mass 1 kg, heating value, net 21.5 MJ, wet mass 1 kg
- solid bleached and unbleached board carton: 0.000976 kg; lognormal variance with pedigree 0.0214, pedigree (2,3,5,5,3)
  properties: carbon content, fossil 0.0190874, carbon content, non-fossil 0.327779, dry mass 0.945 kg, heating value, net 9.8 MJ, water content 0.0582011, wet mass 1 kg
- steam, in chemical industry: 0.058 kg; lognormal variance with pedigree 0.0214, pedigree (2,3,5,5,3)
  properties: dry mass 1 kg, wet mass 1 kg
- waste plastic, mixture: -0.0241 kg; lognormal variance with pedigree 0.0214, pedigree (2,3,2,5,3)
  properties: carbon content, fossil 0.747344, dry mass 0.847 kg, heating value, net 30.79 MJ, water content 0.180638, wet mass 1 kg

## Inputs from nature
- Water, cooling, unspecified natural origin [natural resource, in water]: 0.0437 m3; lognormal variance with pedigree 0.0214, pedigree (2,3,5,5,3)

## Emissions to nature
- Water [air, unspecified]: 0.0169338 m3; lognormal variance with pedigree 0.0427, pedigree (2,2,5,5,1)
- Water [water, unspecified]: 0.0267662 m3; lognormal variance with pedigree 0.0427, pedigree (2,2,5,5,1)

## Sampling procedure
company data

## Extrapolations
no extrapolation This dataset has been copied from an original dataset covering the geography RER. The uncertainty has been adjusted accordingly.
