# air compressor production, screw-type compressor, 300kW

Dataset: EcoSpold 2, unit process
Geography: RoW
Time period: 2006-01-01 to 2022-12-31
Technology level: current
Classification: ISIC rev.4 ecoinvent: 2813:Manufacture of other pumps, compressors, taps and valves
Classification: EcoSpold01Categories: mechanical engineering/compressed air equipment
Tags: ConvertedDataset
Scenario: Business-as-Usual
System model: Substitution, consequential, long-term
Share of production covered: 0 %
Generated by: Roland Steiner
Published in: Steiner, R. 2007
Database: ecoinvent
isCopyrightProtected: true
accessRestrictedTo: 1

## General comment
The weight of the compressor is 4600 kg
[This dataset was already contained in the ecoinvent database version 2. It was not individually updated during the transfer to ecoinvent version 3. Life Cycle Impact Assessment results may still have changed, as they are affected by changes in the supply chain, i.e. in other datasets. This dataset was generated following the ecoinvent quality guidelines for version 2. It may have been subject to central changes described in the ecoinvent version 3 change report (http://www.ecoinvent.org/database/ecoinvent-version-3/reports-of-changes/), and the results of the central updates were reviewed extensively. The changes added e.g. consistent water flows and other information throughout the database. The documentation of this dataset can be found in the ecoinvent reports of version 2, which are still available via the ecoinvent website. The change report linked above covers all central changes that were made during the conversion process.]

## Included activities end
This dataset includes the materials and machining processes needed to produce a compressor. The disposal is also included.

## Geography
Geographical coverage encompasses the industrialised countries.

## Technology
Average technology

## Reference product
- air compressor, screw-type compressor, 300kW: 1 unit; By-product classification allocatable product; CPC 43230: Air or vacuum pumps; air or other gas compressors
  production volume 2.67763 unit
  properties: carbon allocation 0 kg, carbon content 0, price 4657.38 EUR2005

## Inputs from technosphere
- aluminium scrap, post-consumer: -198 kg; lognormal variance with pedigree 0.0208, pedigree (4,3,2,5,1)
  properties: dry mass 1 kg, price 0.685 EUR2005, wet mass 1 kg
- aluminium, cast alloy: 70.4 kg; lognormal variance with pedigree 0.014, pedigree (1,4,5,5,1)
  properties: dry mass 1 kg, wet mass 1 kg
- aluminium, wrought alloy: 149.6 kg; lognormal variance with pedigree 0.014, pedigree (1,4,5,5,1)
  properties: dry mass 1 kg, wet mass 1 kg
- cast iron: 1700 kg; lognormal variance with pedigree 0.014, pedigree (1,4,5,5,1)
  properties: carbon content, fossil 0.04, dry mass 1 kg, wet mass 1 kg
- copper scrap, sorted, pressed: -300 kg; lognormal variance with pedigree 0.0208, pedigree (4,3,2,5,1)
  properties: dry mass 1 kg, price 2.84 EUR2005, wet mass 1 kg
- copper, cathode: 300 kg; lognormal variance with pedigree 0.014, pedigree (1,4,5,5,1)
  properties: dry mass 1 kg, wet mass 1 kg
- injection moulding: 20 kg; lognormal variance with pedigree 0.0208, pedigree (4,3,5,5,1)
- iron scrap, unsorted: -3645 kg; lognormal variance with pedigree 0.0208, pedigree (4,3,2,5,1)
  properties: dry mass 1 kg, price 0.149 EUR2005, wet mass 1 kg
- polystyrene, high impact: 20 kg; lognormal variance with pedigree 0.014, pedigree (1,4,5,5,1)
  properties: carbon content, fossil 0.923077, dry mass 1 kg, heating value, net 38.67 MJ, wet mass 1 kg
- printed wiring board, surface mounted, unspecified, Pb containing: 0.1255 kg; lognormal variance with pedigree 0.014, pedigree (1,4,5,5,1)
  properties: carbon content, fossil 0.132522, dry mass 1 kg, wet mass 1 kg
- printed wiring board, surface mounted, unspecified, Pb free: 0.1255 kg; lognormal variance with pedigree 0.014, pedigree (1,4,5,5,1)
  properties: carbon content, fossil 0.132522, dry mass 1 kg, wet mass 1 kg
- scrap steel: -405 kg; lognormal variance with pedigree 0.0208, pedigree (4,3,2,5,1)
  properties: dry mass 1 kg, wet mass 1 kg
- sheet rolling, aluminium: 220 kg; lognormal variance with pedigree 0.0208, pedigree (4,3,5,5,1)
- sheet rolling, chromium steel: 250 kg; lognormal variance with pedigree 0.014, pedigree (1,4,5,5,1)
- sheet rolling, steel: 2100 kg; lognormal variance with pedigree 0.014, pedigree (1,4,5,5,1)
- steel, chromium steel 18/8, hot rolled: 250 kg; lognormal variance with pedigree 0.014, pedigree (1,4,5,5,1)
  properties: carbon content, fossil 0.0008, dry mass 1 kg, wet mass 1 kg
- steel, low-alloyed, hot rolled: 2100 kg; lognormal variance with pedigree 0.014, pedigree (1,4,5,5,1)
  properties: carbon content, fossil 0.005, dry mass 1 kg, wet mass 1 kg
- synthetic rubber: 9 kg; lognormal variance with pedigree 0.014, pedigree (1,4,5,5,1)
  properties: carbon content, fossil 0.871949, dry mass 1 kg, heating value, net 26.42 MJ, wet mass 1 kg
- used printed wiring boards: -0.251 kg; lognormal variance with pedigree 0.0208, pedigree (4,3,2,5,1)
  properties: carbon content, fossil 0.193742, carbon content, non-fossil 0.000960142, dry mass 1 kg, wet mass 1 kg
- waste aluminium: -22 kg; lognormal variance with pedigree 0.0208, pedigree (4,3,2,5,1)
  properties: dry mass 1 kg, wet mass 1 kg
- waste polystyrene: -0.0644099, -0.0274021, -0.16422, -0.0124197, -2.45779, -0.0678289, -17.2059 kg (7 suppliers, which the file names only by identifier); sum of these -20 kg; lognormal variance with pedigree 0.0208, pedigree (4,3,2,5,1)
  properties: carbon content, fossil 0.922579, dry mass 0.998 kg, heating value, net 38.67 MJ, water content 0.00200401, wet mass 1 kg
- waste rubber, unspecified: -9 kg; lognormal variance with pedigree 0.0208, pedigree (4,3,2,5,1)
  properties: carbon content, fossil 0.853, dry mass 1 kg, heating value, net 27.19 MJ, wet mass 1 kg
- wire drawing, copper: 300 kg; lognormal variance with pedigree 0.0208, pedigree (4,3,5,5,1)

## Extrapolations
none This dataset has been copied from an original dataset covering the geography RER. The uncertainty has been adjusted accordingly.

## Review by Sébastien Humbert 2007-09-05
passed
none

## Review by Emilia Moreno Ruiz 2013-01-08
correction of exchange name to“printed wiring board, surface mounted, [...]"
