# internet access equipment production

Dataset: EcoSpold 2, unit process
Geography: RoW
Time period: 2005-01-01 to 2022-12-31
Technology level: current
Classification: ISIC rev.4 ecoinvent: 2630:Manufacture of communication equipment
Classification: EcoSpold01Categories: electronics/devices
Tags: ConvertedDataset
Scenario: Business-as-Usual
System model: Substitution, consequential, long-term
Generated by: Marianne Leuenberger
Published in: Leuenberger M. 2010
Database: ecoinvent
isCopyrightProtected: true
accessRestrictedTo: 1

## General comment
The data set represents the material in internet access devices, based on assumptions for the chassis and PWB.
[This dataset was already contained in the ecoinvent database version 2. It was not individually updated during the transfer to ecoinvent version 3. Life Cycle Impact Assessment results may still have changed, as they are affected by changes in the supply chain, i.e. in other datasets. This dataset was generated following the ecoinvent quality guidelines for version 2. It may have been subject to central changes described in the ecoinvent version 3 change report (http://www.ecoinvent.org/database/ecoinvent-version-3/reports-of-changes/), and the results of the central updates were reviewed extensively. The changes added e.g. consistent water flows and other information throughout the database. The documentation of this dataset can be found in the ecoinvent reports of version 2, which are still available via the ecoinvent website. The change report linked above covers all central changes that were made during the conversion process.]

## Included activities end
This data set includes all network access devices usually required for internet communication. It namely includes: ADSL modem with router, DSLAM and connecting cables. Manufacture and transport included.

## Geography
Data for Swiss conditions

## Technology
Included devices: ADSL modem with router and DSLAM, DSLAM with 17 line cards with 48 ports. 50% capacity utilisation.

## Reference product
- internet access equipment: 1 unit; By-product classification allocatable product; CPC 47223: Other telephone sets and apparatus for transmission or reception of voice, images or other data, including app[…]
  production volume 3.96633 unit
  properties: carbon allocation 0 kg, carbon content 0, price 6.7877 EUR2005

## Inputs from technosphere
- chassis, internet access equipment: 0.27906 kg; lognormal variance with pedigree 0.0908, pedigree (4,3,5,5,4)
  properties: carbon content, fossil 0.0691989, dry mass 1 kg, wet mass 1 kg
- printed wiring board, surface mounted, unspecified, Pb containing: 0.00898 kg; lognormal variance with pedigree 0.0908, pedigree (4,3,5,5,4)
  properties: carbon content, fossil 0.132522, dry mass 1 kg, wet mass 1 kg
- printed wiring board, surface mounted, unspecified, Pb free: 0.00898 kg; lognormal variance with pedigree 0.0908, pedigree (4,3,5,5,4)
  properties: carbon content, fossil 0.132522, dry mass 1 kg, wet mass 1 kg

## Extrapolations
Average technology This dataset has been copied from an original dataset covering the geography CH. The uncertainty has been adjusted accordingly.

## Review by Christian Bauer 2010-02-07
26.01.2010
passed
C:\Dokumente und Einstellungen\Marianne\Eigene Dateien\Projekte\277_Mobitool\Review\[Ecospold_NetworkDevices-v1.1.xls]X-Process

## Review by Emilia Moreno Ruiz 2013-01-08
correction of exchange name to“printed wiring board, surface mounted, [...]"
