# tellurium production, semiconductor-grade

Dataset: EcoSpold 2, unit process
Geography: CA-QC
Time period: 1992-01-01 to 2022-12-31
Technology level: current
Classification: EcoSpold01Categories: metals/extraction
Classification: ISIC rev.4 ecoinvent: 2011:Manufacture of basic chemicals
Tags: Recontextualization
Scenario: Business-as-Usual
System model: Substitution, consequential, long-term
Generated by: Pascal Lesage
Published in: Classen M. 2009
Database: ecoinvent
isCopyrightProtected: true
accessRestrictedTo: 1

## General comment
This datasets describes the production of high-grade tellurium (99.999%) from copper-telluride cementate by hydrometallurgical processes. These hydrometallurgical processes are the dissolving of copper-telluride cementate with sulphuric acid, the following electrolysis and subsequent purification with zone-melting. This purity of tellurium can be used in the production of thin film solar cells.
[This dataset was already contained in the ecoinvent database version 2. It was not individually updated during the transfer to ecoinvent version 3. Life Cycle Impact Assessment results may still have changed, as they are affected by changes in the supply chain, i.e. in other datasets. This dataset was generated following the ecoinvent quality guidelines for version 2. It may have been subject to central changes described in the ecoinvent version 3 change report (http://www.ecoinvent.org/database/ecoinvent-version-3/reports-of-changes/), and the results of the central updates were reviewed extensively. The changes added e.g. consistent water flows and other information throughout the database. The documentation of this dataset can be found in the ecoinvent reports of version 2, which are still available via the ecoinvent website. The change report linked above covers all central changes that were made during the conversion process.]
Child dataset exchanges identical to GLO dataset. Created to enable linking to regional markets (e.g. for electricity). Data quality indicators adjusted accordingly.

## Included activities end
This datasets describes the production of high-grade tellurium (99.999%) from copper-telluride cementate by hydrometallurgical processes. The energy consumption, emissions as well as transports are considered.

## Geography
Production in GLO.
Child dataset exchanges identical to GLO dataset. Created to enable linking to regional markets (e.g. for electricity). Data quality indicators adjusted accordingly.

## Technology
Production of tellurium from copper-telluride cementate (from copper production), purification to 99.999% (5N)

## Time period
based on literature and patents

## Parameters
- fraction, process water, to air: 0.15 dimensionless; name fraction_PW_to_air; lognormal variance with pedigree 0.092025, pedigree (4,4,3,2,4)
  Literature value. In case when no industry/process specific data are available, default evaporation fraction value is used. This value is 15% and is based on literature (Statistics Canada, 2007 & Shaffer, K.H., 2008, Consumptive water use in the Great Lakes Basin, USGS & Shiklomanov, 2003, World Water Resources at the Beginning of the 21st Century) and has been approved by an expert.

## Reference product
- tellurium, semiconductor-grade: 1 kg; By-product classification allocatable product; CPC 34231: Chemical elements n.e.c.; inorganic acids except phosphoric, nitric and sulphonitric; inorganic oxygen compoun[…]
  production volume 2000 kg
  properties: carbon allocation 0 kg, carbon content 0, carbon content, fossil 0, carbon content, non-fossil 0, dry mass 1 kg, price 37.3061 EUR2005, water content 0, water in wet mass 0 kg, wet mass 1 kg

## Inputs from technosphere
- chemical factory, organics: 4e-10 unit; lognormal variance with pedigree 0.5463, pedigree (4,5,5,3,5)
- copper telluride cement: 2.775 kg; lognormal variance with pedigree 0.013, pedigree (2,3,5,2,1)
  properties: dry mass 1 kg, wet mass 1 kg
- electricity, medium voltage: 10.886 kWh; lognormal variance with pedigree 0.0367, pedigree (4,3,5,3,3)
- sulfuric acid: 0.0375 kg; lognormal variance with pedigree 0.2463, pedigree (4,5,5,3,5)
  properties: dry mass 1 kg, wet mass 1 kg
- wastewater, average: -0.0162 m3; lognormal variance with pedigree 0.0847, pedigree (2,4,3,3,4)
  properties: carbon content, non-fossil 0.194039, dry mass 0.346837 kg, water content 2882.2, wet mass 1000 kg

## Inputs from nature
- Water, river [natural resource, in water]: 0.0162 m3; lognormal variance with pedigree 0.39, pedigree (2,4,5,2,4)

## Emissions to nature
- Sulfur dioxide [air, non-urban air or from high stacks]: 0.00955 kg; lognormal variance with pedigree 0.085, pedigree (2,4,5,2,4)
- Water [air, unspecified]: 0.00243 m3; lognormal variance with pedigree 0.041, pedigree (2,2,5,2,1)
- Water [water, unspecified]: 0.01377 m3; lognormal variance with pedigree 0.041, pedigree (2,2,5,2,1)

## Sampling procedure
Analysis based on literature.

## Extrapolations
Some data available only for zinc are used as proxyChild dataset exchanges identical to GLO dataset. Created to enable linking to regional markets (e.g. for electricity). Data quality indicators adjusted accordingly.
