# transport, freight, train with reefer, freezing

Dataset: EcoSpold 2, unit process
Geography: GLO
Time period: 2010-01-01 to 2022-12-31
Technology level: current
Classification: ISIC rev.4 ecoinvent: 4912:Freight rail transport
Scenario: Business-as-Usual
System model: Substitution, consequential, long-term
Generated by: Tereza Levova
Database: ecoinvent
isCopyrightProtected: true
accessRestrictedTo: 1

## General comment
This dataset represent transport of reefer (refrigerated container) on a freight train. The operation mode of the reefer is freezing (temperature between -35°C and -18°C).
The amount of operation of the reefer needed is calculated using the assumption of the average speed of the train.
Reefer being transported by a train, Switzerland, Zürich, Hardbrücke train station, December 2014

## Included activities start
This dataset simply combine two other activities - transport, freight train and operation of reefer, For more information on these two activities please see the datasets representing these two activities.

## Parameters
- speed: 40 km/hour; name speed_train; lognormal variance with pedigree 0.0166, pedigree (4,5,1,1,1)
  Estimated value based on an expert judgement. This value represents an average speed of freight train including all stops and breaks.

## Reference product
- transport, freight, train with reefer, freezing: 1 metric ton*km; By-product classification allocatable product; CPC 65121: Railway transport services of freight by refrigerator cars
  production volume 9.12147e9 metric ton*km
  properties: carbon allocation 0 kg, carbon content 0, price 0.0273344 EUR2005

## Inputs from technosphere
- operation, reefer, freezing: 1.04167 kg*day; lognormal variance with pedigree 0.0166, pedigree (4,5,4,1,1)
- transport, freight train: 1 metric ton*km; lognormal variance with pedigree 0.0006, pedigree (1,1,4,1,1)
