# rock crushing

Dataset: EcoSpold 2, unit process
Geography: RoW
Time period: 1999-01-01 to 2022-12-31
Technology level: current
Classification: EcoSpold01Categories: construction processes/machinery
Classification: ISIC rev.4 ecoinvent: 2824:Manufacture of machinery for mining, quarrying and construction
Synonyms: Breaker
Tags: ConvertedDataset
Scenario: Business-as-Usual
System model: Substitution, consequential, long-term
Generated by: Daniel Kellenberger (obsolete)
Published in: Kellenberger D. 2007
Database: ecoinvent
isCopyrightProtected: true
accessRestrictedTo: 1

## General comment
Most data are taken from an LCA report and are based on a specific type of crusher (Nordberg HP 400 SX). The transportation distances are estimated and the transport requirements added. This module may not be used if having a high importance in a certain context. Crusher throughput capacity declared by the producer: 454 tons per hour
[This dataset was already contained in the ecoinvent database version 2. It was not individually updated during the transfer to ecoinvent version 3. Life Cycle Impact Assessment results may still have changed, as they are affected by changes in the supply chain, i.e. in other datasets. This dataset was generated following the ecoinvent quality guidelines for version 2. It may have been subject to central changes described in the ecoinvent version 3 change report (http://www.ecoinvent.org/database/ecoinvent-version-3/reports-of-changes/), and the results of the central updates were reviewed extensively. The changes added e.g. consistent water flows and other information throughout the database. The documentation of this dataset can be found in the ecoinvent reports of version 2, which are still available via the ecoinvent website. The change report linked above covers all central changes that were made during the conversion process.]

## Included activities end
Includes the machine, spares and wears, lubricating oil, and the transportation of the new parts to the assembly plant as well as transportation of the crusher to the operational sites. Electricity consumption and dust emissions are not included.

## Geography
Certain elementary flows or intermediate product flows are extrapolated from Swiss conditions.

## Technology
Rock crusher type Nordberg HP400 SX produced in the USA in 1999, used as basis

## Reference product
- rock crushing: 1 kg; By-product classification allocatable product; CPC 44440: Machinery for sorting, screening, separating, washing, crushing, grinding, mixing or kneading earth, stone, or[…]
  production volume 2.67763 kg
  properties: carbon allocation 0 kg, carbon content 0, price 8.06314e-5 EUR2005

## Inputs from technosphere
- cast iron: 7e-6 kg; lognormal variance with pedigree 0.038, pedigree (1,5,5,5,3)
  properties: carbon content, fossil 0.04, dry mass 1 kg, wet mass 1 kg
- electricity, medium voltage: 6.82201e-5, 2.55246e-6, 3.24299e-5, 0.000562861, 4.72621e-5, 2.53322e-6 kWh (6 suppliers, which the file names only by identifier); sum of these 0.000715859 kWh; lognormal variance with pedigree 0.0578, pedigree (4,3,5,4,4)
- industrial machine, heavy, unspecified: 4.41e-7 kg; lognormal variance with pedigree 0.4, pedigree (5,5,5,5,1)
- lubricating oil: 4.5e-7 kg; lognormal variance with pedigree 0.038, pedigree (1,5,5,5,3)
  properties: carbon content, fossil 0.75, dry mass 1 kg, heating value, net 40.2 MJ, wet mass 1 kg

## Sampling procedure
most data from LCA study

## Extrapolations
See geography This dataset has been copied from an original dataset covering the geography RER. The uncertainty has been adjusted accordingly.

## Review by Roberto Dones 2003-07-21
passed

## Review by Bo Weidema 2012-09-14
electricity consumption added
