# transport, freight, small lorry with refrigeration machine, EURO3, CO2 refrigerant, freezing to generic market

Dataset: EcoSpold 2, unit process
Geography: GLO
Time period: 2010-01-01 to 2022-12-31
Technology level: current
Classification: ISIC rev.4 ecoinvent: 4923:Freight transport by road
Classification: EcoSpold01Categories: transport systems/road
Tags: linking activity
Scenario: Business-as-Usual
System model: Substitution, consequential, long-term
Generated by: Tereza Levova
Database: ecoinvent
isCopyrightProtected: true
accessRestrictedTo: 1

## General comment
This is a linking activity which transfers part of the production volume of the transport, freight, lorry with refrigeration machine, 3.5-7.5 ton and 7.5-16 ton, EURO3, carbon dioxide, liquid refrigerant, freezing to the generic market for transport, freight, lorry with refrigeration machine, cooling.

## Technology
The technology level of the linking activity is set to be the same as in case of the activity supplying the specific product.

## Parameters
- fraction, to generic market: 0.5 dimensionless; name fraction_to_generic_market; lognormal variance with pedigree 0.1386, pedigree (4,5,1,5,5)
  Estimated value; 50% of the production volume goes to the generic markets for transport, freight, lorry. Meaning, that 50% of people do not care or do not know what is the size or EURO class of the lorries with refrigeration machine.

## Reference product
- transport, freight, lorry with refrigeration machine, freezing: 1 metric ton*km; By-product classification allocatable product; CPC 65111: Road transport services of freight by refrigerator vehicles
  production volume 3.50173e8 metric ton*km
  properties: carbon allocation 0 kg, carbon content 0, price 0.0789054 EUR2005

## Inputs from technosphere
- transport, freight, lorry with refrigeration machine, 3.5-7.5 ton, EURO3, carbon dioxide, liquid refrigerant, freezing: 0.454545 metric ton*km; lognormal variance with pedigree 0.0006, pedigree (1,1,3,1,1)
- transport, freight, lorry with refrigeration machine, 7.5-16 ton, EURO3, carbon dioxide, liquid refrigerant, freezing: 0.545455 metric ton*km; lognormal variance with pedigree 0.0006, pedigree (1,1,3,1,1)
