# salt production from seawater, evaporation pond

Dataset: EcoSpold 2, unit process
Geography: GLO
Time period: 2019-01-01 to 2022-12-31
Technology level: current
Classification: ISIC rev.4 ecoinvent: 0893:Extraction of salt
Scenario: Business-as-Usual
System model: Substitution, consequential, long-term
Generated by: Avraam Symeonidis
Database: ecoinvent
isCopyrightProtected: true
accessRestrictedTo: 1

## General comment
This dataset represents the production of salt from seawater in an evaporation pond in a saline plant by the sea. the location is placed in a warm climatic zone where radiation and wind speed facilitate the evaporation of water. Seawater is driven to the ponds where it is left to evaporate. Salt content increases steadily and salt crystals form naturally. Finally the salt is collected mechanically. The dataset is constructed using literature and expert judgement.
Literature: Akridge, D. Glen. (2008). Methods for calculating brine evaporation rates during salt production. Journal of Archaeological Science. 35. 1453-1462. 10.1016/j.jas.2007.10.013.
U.S. Geological Survey, 2019, National Minerals Information Center, Commodity Statistics and Information, Salt Statistics and Information. Accessed at 25.06.2019 at: https://www.usgs.gov/centers/nmic/salt-statistics-and-information

## Included activities start
Activity starts with the pumping of seawater and depositing it inside the evaporation pond.

## Included activities end
Activity ends with the salt being collected and ready for transportation in the saline plant.

## Parameters
- dynamic pressure head: 0 dimensionless
- elevation head ground water: 0 dimensionless
- elevation head surface water: 2 dimensionless
- engine efficiency, electricity: 0.8 dimensionless
- fraction ground water: 0 dimensionless
- fraction of electricity pumps: 1 dimensionless
- fraction surface water: 1 dimensionless
- pump efficiency: 0.7 dimensionless

## Reference product
- salt: 1 kg; By-product classification allocatable product; CPC 16200: Salt and pure sodium chloride; sea water
  production volume 1.41e11 kg
  properties: carbon allocation 0 kg, carbon content 0, carbon content, fossil 0, carbon content, non-fossil 0, dry mass 1 kg, price 0.00904173 EUR2005, water content 0, water in wet mass 0 kg, wet mass 1 kg

## Inputs from technosphere
- building machine: 1e-8 unit; lognormal variance with pedigree 0.47, pedigree (5,5,2,5,5)
- water pump operation, electric: 0.001 MJ; lognormal variance with pedigree 0.47, pedigree (5,5,2,5,5)
  properties: price 0.109 EUR2005

## Inputs from nature
- Occupation, seabed, unspecified [natural resource, land]: 0.654545 m2*year; lognormal variance with pedigree 0.21, pedigree (5,5,2,5,5)
- Water, salt, ocean [natural resource, in water]: 0.0285714 m3; lognormal variance with pedigree 0.1706, pedigree (5,5,2,5,5)

## Emissions to nature
- Water [air, unspecified]: 0.0275714 m3; lognormal variance with pedigree 0.1706, pedigree (5,5,2,5,5)
