# land use change, perennial crop

Dataset: EcoSpold 2, unit process
Geography: GH
Time period: 2010-01-01 to 2022-12-31
Technology level: current
Classification: ISIC rev.4 ecoinvent: 0161:Support activities for crop production
Tags: WFLDB
Scenario: Business-as-Usual
System model: Substitution, consequential, long-term
Generated by: Vincent Rossi
Database: ecoinvent
isCopyrightProtected: true
accessRestrictedTo: 1

## General comment
This dataset represents the impacts associated to 1 ha of land use change (LUC), split between change from annual cropland, perennial cropland, primary forest, secondary forest and grassland. This dataset is specific to the country and to perennial cropland.
The dataset further includes the (management practice specific) occupation impacts, i.e. the loss of soil organic carbon (SOC), methane (CH4), nitrous oxide (N2O) and, when relevant, peat oxidation.

## Included activities start
The activity starts with the consolidation of the country specific land use changes: land transformation from primary forest, secondary forest, existing annual cropland and existing perennial cropland, to perennial cropland.

## Included activities end
Included processes: land use changes (in kg NPP0), C and N emissions due to soil occupation (i.e. SOC change and emissions from peat oxidation by drainage.
This activity ends with the addition of land occupation-related inputs and emissions (C in soil or biomass, CO2 from air, gross energy, CO2 to air, CH4 to air and N2O to air)

## Parameters
- LUC_crop_specific: 1 dimensionless
  This parameter allows to switch between a 'crop specific' and a 'country specific' approach when calculating the LUC of a crop. By default, the chosen approach is 'crop specific', so the value of the parameter is 1. If you want to apply a 'country specific' approach, turn the parameter to 0.

## Reference product
- land use change, perennial crop: 1 ha; By-product classification allocatable product; CPC 7: Financial and related services; real estate services; and rental and leasing services
  production volume 9954.12 ha
  properties: carbon allocation 0 kg, carbon content 0, price 0 EUR2005

## Inputs from technosphere
- land tenure, arable land, measured as carbon net primary productivity, perennial crop: 516.754 kg; lognormal variance with pedigree 0.006848, pedigree (2,2,5,2,1)
  properties: carbon content, non-fossil 1, dry mass 1 kg, wet mass 1 kg

## Inputs from nature
- Carbon, organic, in soil or biomass stock [natural resource, in ground]: 4.342 kg; lognormal variance with pedigree 0.006848, pedigree (2,2,5,2,1)
- Energy, gross calorific value, in biomass [natural resource, biotic]: 151.5 MJ; lognormal variance with pedigree 0.006848, pedigree (2,2,5,2,1)

## Emissions to nature
- Carbon dioxide, from soil or biomass stock [air, non-urban air or from high stacks]: 15.7872 kg; lognormal variance with pedigree 0.006848, pedigree (2,2,5,2,1)
- Dinitrogen monoxide [air, non-urban air or from high stacks]: 0.007294 kg; lognormal variance with pedigree 0.006848, pedigree (2,2,5,2,1)
- Methane, non-fossil [air, non-urban air or from high stacks]: 0.048308 kg; lognormal variance with pedigree 0.006848, pedigree (2,2,5,2,1)

## Sampling procedure
Data are based on 2nd edition of the Quantis-modified tool developed by Blonk Consultants 'WFLDB-adapted-Blonk 2014 direct-land-use-change-assessment-tool_2015-05-18a.xlsx'.
The amount of this process to take into account as input to the crop inventory is dependent on the portion of LUC allocated to the specific crop in the country considered. This allocation is also calculated using the 2nd edition of the Quantis-modified tool developed by Blonk Consultants, based on FAO data.
For further information see WFLDB Methodological Guidelines for the Life Cycle Inventory of Agricultural Products version 3.0, available at: (Report section: https://v30.ecoquery.ecoinvent.org/File/Reports).
