# steel production, converter, low-alloyed

Dataset: EcoSpold 2, unit process
Geography: RoW
Time period: 2013-01-01 to 2023-12-31
Technology level: modern
Classification: ISIC rev.4 ecoinvent: 2410:Manufacture of basic iron and steel
Scenario: Business-as-Usual
System model: Substitution, consequential, long-term
Generated by: Johannes Müller
Published in: Remus, R. 2013
Database: ecoinvent
isCopyrightProtected: true
accessRestrictedTo: 1

## General comment
"Background:
This activity represents the production of primary low-alloyed steel in a basic oxygen furnace (BOF), a discontinuous process involving the following steps: 1) pretreatment of hot metal (pig iron) from the blast furnace (desulphurisation, deslagging, etc.); 2) mixing of charge (including alloying additions), weighing, transfer and reladling ; 3) oxidation in the BOF (decarburisation and oxidation of impurities); 4) secondary metallurgical treatment in a ladle furnace; and 5) casting (continuous and/or ingot).
Modelling approach:
Data on were mostly taken from the IPPC Best Available Technology report from the European Commission (Remus et al., 2013); note that where only data ranges were provided, the geometric mean of reported values was used here. The proportion of each by-product that is recycled internally (i.e. returned as an input to the process after it has been produced) is based on measured data from plants worldwide reported by worldsteel (2010): slag (including desulphurisation slag, BOF slag, slag from secondary metallurgy and slag from continuous casting), 14%; spittings, 100%; dust and sludge, 22%; and mill scale, 89%.
References:
Remus, R., Aguado-Monsonet, M. A., Roudier, S. & Samcho, L. D. (2013). JRC reference report - Best available techniques (BAT) reference document for iron and steel production. Joint Research Centre - European Commission, Luxemboug.
Worldsteel (2010). Steel industry by-products. World Steel Association: Brussels, Belgium."

## Included activities start
At the gate of the steelmaking plant with the arrival of the hot metal (pig iron).

## Included activities end
At the gate of the steelmaking plant with the cast steel ready for transport to manufacturers and fabricators.

## Geography
Data are taken from basic oxygen furnace plants across Europe and are considered representative of the average situation globally.

## Technology
Represents average European technology; LD converter and secondary metallurgy

## Time period
Data are mostly compiled from reports published between 2005 and 2010 but are considered representative of modern operations.

## Parameters
- annual production volume, India: 4.11293e9 kg
- fraction, cooling water, cooling pond system, to air: 0.032 dimensionless; name fraction_CW_CP_to_air; lognormal variance with pedigree 0.0413, pedigree (2,3,1,3,1)
  Calculated based on literature value (Scown, C.D., 2011, Water Footprint of U.S. Transportation Fuels and supplying information of the article) (Vionnet, S., Quantis Water Database - Technical Report, 2012).
- fraction, cooling water, once-through system, to air: 0.004 dimensionless; name fraction_CW_OT_to_air; lognormal variance with pedigree 0.0413, pedigree (2,3,1,3,1)
  (same comment as for fraction, cooling water, cooling pond system, to air)
- fraction, cooling water, recirculating system, to air: 0.771 dimensionless; name fraction_CW_R_to_air; lognormal variance with pedigree 0.0413, pedigree (2,3,1,3,1)
  (same comment as for fraction, cooling water, cooling pond system, to air)
- fraction, cooling water, to air: 0.56 dimensionless; lognormal variance with pedigree 0.0414, pedigree (2,3,2,2,1)
- fraction, process water, to air: 0.095 dimensionless; lognormal variance with pedigree 0.092, pedigree (4,4,3,2,4)

## Reference product
- steel, low-alloyed: 1 kg; By-product classification allocatable product; CPC 41122: Alloy steel in ingots or other primary forms and semi-finished products of alloy steel
  production volume 9.01068e10 kg
  properties: carbon allocation 0.005 kg, carbon content 0.005, carbon content, fossil 0.005, carbon content, non-fossil 0, dry mass 1 kg, heating value, net 0 MJ, price 0.468 EUR2005, water content 0, water in wet mass 0 kg, wet mass 1 kg

## Inputs from technosphere
- aluminium, wrought alloy: 8.78501e-5 kg; lognormal variance with pedigree 0.0058, pedigree (3,3,1,5,2)
  properties: dry mass 1 kg, wet mass 1 kg
- argon, liquid: 0.000116964 kg; lognormal variance with pedigree 0.0058, pedigree (3,3,1,5,2)
  properties: dry mass 1 kg, wet mass 1 kg
- basic oxygen furnace dust: -0.019396 kg; lognormal variance with pedigree 0.004425, pedigree (2,3,3,2,2)
  properties: aluminium content 0.0128653, antimony content 0.0031, calcium content 0.0868734, carbon content, fossil 0.0181399, dry mass 0.999 kg, iron content 0.528324, magnesium content 0.00854209, manganese content 0.0049, oxygen content 0.312189, silicon content 0.0100985, wet mass 1 kg, zinc content 0.00713417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
- basic oxygen furnace secondary metallurgy slag: -0.0003008 kg; lognormal variance with pedigree 0.004425, pedigree (2,3,3,2,2)
  properties: aluminium content 0.0530427, calcium content 0.312637, dry mass 0.995 kg, fluorine content 0.0129487, iron content 0.0199153, magnesium content 0.0427775, manganese content 0.00556519, oxygen content 0.476841, silicon content 0.0601451, sulfur content 0.00614898, water content 0.00502513, wet mass 1 kg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
- basic oxygen furnace slag: -0.104898 kg; lognormal variance with pedigree 0.004425, pedigree (2,3,3,2,2)
  properties: aluminium content 0.0101034, calcium content 0.324525, dry mass 0.995 kg, iron content 0.182475, magnesium content 0.0350101, manganese content 0.0250783, oxygen content 0.329259, phosphorus content 0.0102096, silicon content 0.0600014, vanadium content 0.00554358, water content 0.00502513, wet mass 1 kg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
- basic oxygen furnace sludge: -0.0003008 kg; lognormal variance with pedigree 0.004425, pedigree (2,3,3,2,2)
  properties: aluminium content 0.00224181, calcium content 0.0202279, carbon content, fossil 0.00588235, dry mass 0.68 kg, iron content 0.608767, magnesium content 0.00196609, manganese content 0.00169783, oxygen content 0.0208176, silicon content 0.00570528, water content 0.470588, wet mass 1 kg, zinc content 0.0109474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
- basic oxygen furnace waste: -0.00335064 kg; lognormal variance with pedigree 0.0912, pedigree (2,3,5,5,3)
  properties: dry mass 1 kg, wet mass 1 kg
- blast furnace gas: -0.0304027 MJ; lognormal variance with pedigree 0.0912, pedigree (2,3,5,5,3)
  properties: carbon content, fossil 0.156611, dry mass 0.367647 kg, price 0.004 EUR2005, wet mass 0.367647 kg
- blast oxygen furnace converter: 1.3333e-11 unit; lognormal variance with pedigree 0.5, pedigree (5,5,5,5,5)
- calcium carbide, technical grade: 0.000190693 kg; lognormal variance with pedigree 0.0058, pedigree (3,3,1,5,2)
  properties: carbon content, fossil 0.375, dry mass 1 kg, heating value, net 11.36 MJ, wet mass 1 kg
- coke: 0.000183216 MJ; lognormal variance with pedigree 0.0034, pedigree (2,3,2,5,1)
  properties: carbon content, fossil 0.869149, dry mass 0.0328671 kg, heating value, net 28.6 MJ, water content 0.0638298, wet mass 0.034965 kg
- compressed air, 600 kPa gauge: 0.0144222 m3; lognormal variance with pedigree 0.0572, pedigree (2,3,5,5,3)
- copper, cathode: 7.98637e-7 kg; lognormal variance with pedigree 0.0058, pedigree (3,3,1,5,2)
  properties: dry mass 1 kg, wet mass 1 kg
- diesel: 1.36199e-7, 1.92542e-8, 2.7143e-6, 6.54764e-9, 2.78297e-8 kg (5 suppliers, which the file names only by identifier); sum of these 2.90413e-6 kg; lognormal variance with pedigree 0.0058, pedigree (3,3,1,5,2)
  properties: carbon content, fossil 0.865, dry mass 1 kg, heating value, net 42.8 MJ, wet mass 1 kg
- dolomite: 0.00442218 kg; lognormal variance with pedigree 0.0034, pedigree (2,3,2,5,1)
  properties: carbon content, fossil 0.130435, dry mass 1 kg, heating value, net 3.95 MJ, wet mass 1 kg
- electricity, medium voltage: 0.000735153, 0.00139703, 0.000834831, 0.0209488, 1.68108e-5, 8.01206e-5, 9.40773e-5, 2.44057e-5, 0.00565321, 0.000189163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 kWh (44 suppliers, which the file names only by identifier); sum of these 0.05 kWh; lognormal variance with pedigree 0.0034, pedigree (2,3,2,5,1)
- electrode, negative, Ni: 5.19114e-6 kg; lognormal variance with pedigree 0.0058, pedigree (3,3,1,5,2)
  properties: carbon content, fossil 0.00301397, dry mass 1 kg, wet mass 1 kg
- ferromanganese, high-coal, 74.5% Mn: 0.015278 kg; lognormal variance with pedigree 0.0512, pedigree (2,5,5,5,1)
  properties: carbon content, fossil 0.075, dry mass 1 kg, heating value, net 2.27 MJ, iron content 0.15, wet mass 1 kg
- ferronickel: 0.045 kg; lognormal variance with pedigree 0.002, pedigree (1,1,1,5,1)
  properties: carbon content, fossil 0.0165, dry mass 1 kg, iron content 0.7, wet mass 1 kg
- ferrosilicon: 7.61609e-6 kg; lognormal variance with pedigree 0.0058, pedigree (3,3,1,5,2)
  properties: carbon content, fossil 0.1, dry mass 1 kg, heating value, net 3.03 MJ, wet mass 1 kg
- inert waste, for final disposal: -0.000565685 kg; lognormal variance with pedigree 0.004425, pedigree (2,3,3,2,2)
  properties: dry mass 0.995 kg, water content 0.00502513, wet mass 1 kg
- iron ore concentrate: 0.000622896 kg; lognormal variance with pedigree 0.002, pedigree (1,1,1,5,1)
  properties: dry mass 1 kg, iron content 0.65, wet mass 1 kg
- iron scrap, sorted, pressed: 0.198865 kg; lognormal variance with pedigree 0.0034, pedigree (2,3,2,5,1)
  properties: dry mass 1 kg, iron content 0.92, wet mass 1 kg
- lime: 0.00230153 kg; lognormal variance with pedigree 0.0058, pedigree (3,3,1,5,2)
  properties: carbon content, fossil 0.120005, dry mass 1 kg, wet mass 1 kg
- liquefied petroleum gas: 6.7625e-8, 2.03874e-7, 9.65375e-6, 2.9029e-8, 6.49438e-7 kg (5 suppliers, which the file names only by identifier); sum of these 1.06037e-5 kg; lognormal variance with pedigree 0.0058, pedigree (3,3,1,5,2)
  properties: carbon content, fossil 0.821863, dry mass 1 kg, heating value, net 45.5 MJ, wet mass 1 kg
- manganese: 2.03289e-5 kg; lognormal variance with pedigree 0.0058, pedigree (3,3,1,5,2)
  properties: dry mass 1 kg, wet mass 1 kg
- mill scale: -6.63e-5 kg; lognormal variance with pedigree 0.004425, pedigree (2,3,3,2,2)
  properties: calcium content 0.0101925, carbon content, fossil 0.00761696, dry mass 0.905505 kg, iron content 0.696142, manganese content 0.00850218, oxygen content 0.163753, potassium content 0.0023911, silicon content 0.00184691, sodium content 0.00141069, tungsten content 0.00751569, water content 0.104356, wet mass 1 kg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
- molybdenite: 0.00059649 kg; lognormal variance with pedigree 0.0512, pedigree (2,5,5,5,1)
  properties: dry mass 1 kg, wet mass 1 kg
- natural gas, high pressure: 8.30175e-5, 1.71813e-5, 1.59269e-5, 4.48538e-6, 3.44766e-5, 9.90584e-6, 6.30994e-6, 6.89912e-6, 4.18128e-6, 4.94152e-6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 m3 (24 suppliers, which the file names only by identifier); sum of these 0.00120219 m3; lognormal variance with pedigree 0.0034, pedigree (2,3,2,5,1)
  properties: carbon content, fossil 0.602381, dry mass 0.84 kg, heating value, gross 39 MJ, heating value, net 36 MJ, wet mass 0.84 kg
- nickel, class 1: 5.83731e-7 kg; lognormal variance with pedigree 0.0058, pedigree (3,3,1,5,2)
  properties: dry mass 1 kg, wet mass 1 kg
- nitrogen, liquid: 0.00162595 kg; lognormal variance with pedigree 0.0058, pedigree (3,3,1,5,2)
  properties: dry mass 1 kg, wet mass 1 kg
- oxygen, liquid: 0.078054 kg; lognormal variance with pedigree 0.0034, pedigree (2,3,2,5,1)
  properties: dry mass 1 kg, wet mass 1 kg
- pig iron: 0.867945 kg; lognormal variance with pedigree 0.0034, pedigree (2,3,2,5,1)
  properties: carbon content, fossil 0.045, dry mass 1 kg, iron content 0.92, wet mass 1 kg
- propane: 1.25241e-5 kg; lognormal variance with pedigree 0.0058, pedigree (3,3,1,5,2)
  properties: carbon content, fossil 0.817139, dry mass 1 kg, heating value, net 46.4 MJ, wet mass 1 kg
- quicklime, in pieces, loose: 0.044833 kg; lognormal variance with pedigree 0.0034, pedigree (2,3,2,5,1)
  properties: dry mass 0.99 kg, water content 0.010101, wet mass 1 kg
- sponge iron: 0.000780486 kg; lognormal variance with pedigree 0.0058, pedigree (3,3,1,5,2)
  properties: carbon content, fossil 0.1, dry mass 1 kg, heating value, net 3.03 MJ, iron content 0.82, phosphorus content 0.05, sulfur content 0.03, wet mass 1 kg
- steam, in chemical industry: 0.000366647 kg; lognormal variance with pedigree 0.0058, pedigree (3,3,1,5,2)
  properties: dry mass 1 kg, wet mass 1 kg
- wastewater from pig iron production: -0.00134164 m3; lognormal variance with pedigree 0.0912, pedigree (2,3,5,5,3)
  properties: carbon content, fossil 1.2149e-5, dry mass 0.337476 kg, water content 2962.17, wet mass 1000 kg
- wastewater, average: -1.99674e-5, -7.10917e-8 m3 (2 suppliers, which the file names only by identifier); sum of these -2.00385e-5 m3; lognormal variance with pedigree 0.0912, pedigree (2,3,5,5,3)
  properties: carbon content, non-fossil 0.194039, dry mass 0.346837 kg, water content 2882.2, wet mass 1000 kg

## Inputs from nature
- Water, cooling, unspecified natural origin [natural resource, in water]: 0.00577581 m3; lognormal variance with pedigree 0.0152, pedigree (2,3,3,5,1)
- Water, unspecified natural origin [natural resource, in water]: 2.50482e-5 m3; lognormal variance with pedigree 0.0058, pedigree (3,3,1,5,2)

## Emissions to nature
- Carbon dioxide, fossil [air, unspecified]: 0.0627089 kg; lognormal variance with pedigree 0.0034, pedigree (2,3,2,5,1)
- Carbon monoxide, fossil [air, unspecified]: 0.00168214 kg; lognormal variance with pedigree 0.6534, pedigree (2,3,2,5,1)
- Chromium III [air, unspecified]: 2.73861e-8 kg; lognormal variance with pedigree 0.6534, pedigree (2,3,2,5,1)
- Copper ion [air, unspecified]: 1.38684e-7 kg; lognormal variance with pedigree 0.6534, pedigree (2,3,2,5,1)
- Dioxins, measured as 2,3,7,8-tetrachlorodibenzo-p-dioxin [air, unspecified]: 6.35767e-14 kg; lognormal variance with pedigree 0.3034, pedigree (2,3,2,5,1)
- Heat, waste [air, unspecified]: 0.204696 MJ; lognormal variance with pedigree 0.0912, pedigree (2,3,5,5,3)
- Iron ion [air, unspecified]: 4.115e-5 kg; lognormal variance with pedigree 0.7012, pedigree (2,3,5,5,3)
- Lead II [air, unspecified]: 4.08167e-7 kg; lognormal variance with pedigree 0.6534, pedigree (2,3,2,5,1)
- Manganese II [air, unspecified]: 6.84105e-7 kg; lognormal variance with pedigree 0.6534, pedigree (2,3,2,5,1)
- Nitrogen oxides [air, unspecified]: 2.12368e-5 kg; lognormal variance with pedigree 0.0434, pedigree (2,3,2,5,1)
- PAH, polycyclic aromatic hydrocarbons [air, unspecified]: 1e-8 kg; lognormal variance with pedigree 0.3034, pedigree (2,3,2,5,1)
- Particulate Matter, < 2.5 um [air, unspecified]: 4.47437e-5 kg; lognormal variance with pedigree 0.3034, pedigree (2,3,2,5,1)
- Water [air, non-urban air or from high stacks]: 5.00963e-6 m3; lognormal variance with pedigree 0.0058, pedigree (3,3,1,5,2)
- Water [air, unspecified]: 0.00611841 m3; lognormal variance with pedigree 0.0427, pedigree (2,2,1,5,1)

## Sampling procedure
Data were taken from direct measurements at blast furnace plants across Europe.

Note that there may be mass imbalances in the dataset. This is because the values represent the average situation in steelmaking many different plants and have not been augmented or adjusted. Similarily, these values represent the situation post-ventilation/off-gas management, i.e. it is not the mass of carbon, for instance, that is produced that is reported but the amount that is actually, on average, emitted to the environment considering an average mix of steelmaking, technologies, off-gas management approaches, and internal recovery (recycling) or utilisation rates at integrated steelmakers in Europe.

It should also be noted that data on radionucleid emissions to air, e.g. of Pollonium 210 and Lead 210, were not available and have therefore not been inventoried here.

## Extrapolations
This dataset is extrapolated from data collected from European sites; the uncertainty has been adjusted accordingly.
