# fuel cell production, solid oxide, with micro gas turbine, 180kW electrical, future

Dataset: EcoSpold 2, unit process
Geography: RoW
Time period: 2000-01-01 to 2022-12-31
Technology level: current
Classification: ISIC rev.4 ecoinvent: 2790:Manufacture of other electrical equipment
Classification: EcoSpold01Categories: natural gas/cogeneration
Synonyms: solid oxide fuel cell hybrid cycle power system; SOFC gas turbine hybrid; SOFC Gasturbinen Hybridsystem; Festoxid Brennstoffzellen Gasturbinen Hybridsystem
Tags: ConvertedDataset
Scenario: Business-as-Usual
System model: Substitution, consequential, long-term
Generated by: Alex Primas
Published in: Primas A. 2007
Database: ecoinvent
isCopyrightProtected: true
accessRestrictedTo: 1

## General comment
The module reflects a hybrid solid oxide fuel cell (SOFC) micro gas turbine system with 180 kW electrical output. Inventory based on information from literature and one manufacturer. Life time operation of auxiliary systems is 80'000 h. Stack lifetime is 48'000 h. Lifetime of the micro gas turbine is 50'000 h.
[This dataset was already contained in the ecoinvent database version 2. It was not individually updated during the transfer to ecoinvent version 3. Life Cycle Impact Assessment results may still have changed, as they are affected by changes in the supply chain, i.e. in other datasets. This dataset was generated following the ecoinvent quality guidelines for version 2. It may have been subject to central changes described in the ecoinvent version 3 change report (http://www.ecoinvent.org/database/ecoinvent-version-3/reports-of-changes/), and the results of the central updates were reviewed extensively. The changes added e.g. consistent water flows and other information throughout the database. The documentation of this dataset can be found in the ecoinvent reports of version 2, which are still available via the ecoinvent website. The change report linked above covers all central changes that were made during the conversion process.]

## Included activities end
The module includes the most important materials used for production, the energy needed for production, planning and engineering. Also included is the transport of the raw materials, the engine delivery and the installation on site.

## Geography
Process applicable in central European conditions.

## Technology
Hybrid system combining a 125 kWe solid oxide fuel cell (SOFC) with tubular stack design and a 55kWe micro gas turbine. For central cogeneration use. Performance, stack lifetime and catalyst use according to expected future values for a serial product. Operation with connection to low pressure gas network. Electrical efficiency 58%, total efficiency 80%.

## Reference product
- fuel cell, solid oxide, with micro gas turbine, 180kW electrical, future: 1 unit; By-product classification allocatable product; CPC 46410: Primary cells and primary batteries
  production volume 3.96633 unit
  properties: carbon allocation 0 kg, carbon content 0, price 61744.4 EUR2005

## Inputs from technosphere
- fuel cell, solid oxide, 125kW electrical, future: 1 unit; lognormal variance with pedigree 0.37, pedigree (5,5,5,5,1)
- micro gas turbine, 100kW electrical: 1 unit; lognormal variance with pedigree 0.388, pedigree (5,5,5,5,3)

## Sampling procedure
Literature data and manufacturer information

## Extrapolations
none This dataset has been copied from an original dataset covering the geography CH. The uncertainty has been adjusted accordingly.

## Review by Rolf Frischknecht 2007-08-13
passed
none
