# operation, housing system, cattle, loose

Dataset: EcoSpold 2, unit process
Geography: CA-QC
Time period: 1994-01-01 to 2022-12-31
Technology level: current
Classification: EcoSpold01Categories: agricultural means of production/buildings
Classification: ISIC rev.4 ecoinvent: 0141:Raising of cattle and buffaloes
Tags: Operation
Scenario: Business-as-Usual
System model: Substitution, consequential, long-term
Generated by: Pascal Lesage
Published in: Nemecek, T. 2007
Database: ecoinvent
isCopyrightProtected: true
accessRestrictedTo: 1

## General comment
The module includes the use of energy and auxiliary materials for the operation of lighting, storage and drying of roughage, dung scraper, slurry agitator, milking machine, milk cooling, cleaning, drinking water. The functional unit is 1 livestock unit (LU) during 1 year. The original inventory on which the GLO is based applies to Swiss agricultural buildings. Child dataset exchanges adapted to Quebec context for a number of exchanges. Some exchanges are still based on GLO dataset - uncertainty adjusted accordingly.
[This dataset was already contained in the ecoinvent database version 2. It was not individually updated during the transfer to ecoinvent version 3. Life Cycle Impact Assessment results may still have changed, as they are affected by changes in the supply chain, i.e. in other datasets. This dataset was generated following the ecoinvent quality guidelines for version 2. It may have been subject to central changes described in the ecoinvent version 3 change report (http://www.ecoinvent.org/database/ecoinvent-version-3/reports-of-changes/), and the results of the central updates were reviewed extensively. The changes added e.g. consistent water flows and other information throughout the database. The documentation of this dataset can be found in the ecoinvent reports of version 2, which are still available via the ecoinvent website. The change report linked above covers all central changes that were made during the conversion process.]

## Included activities end
The inventory takes into account the energy and auxiliary materials like water, lubricating oil and cleaning agents for the use of the described module for one year. Also included is the use of the infrastructure with the binding of a certain part of the appropriate infrastructure module. Not taken into account were the direct emission of the animal husbandry, fodder production and produced waste water.

## Technology
The use of energy and auxiliary materials are calculated for the conditions defined in the infrastructure-module with literature data and experts knowledge.

## Time period
Period indicated in the reference.

## Parameters
- fraction, process water, to air: 0.15 dimensionless; lognormal variance with pedigree 0.092025, pedigree (4,4,3,2,4)
- fraction, tap water, to air: 0.15 dimensionless; lognormal variance with pedigree 0.092025, pedigree (4,4,3,2,4)
- fraction, water, deionised, to air: 0.15 dimensionless; lognormal variance with pedigree 0.092025, pedigree (4,4,3,2,4)

## Reference product
- operation, housing system, cattle, loose, per animal unit: 1 unit; By-product classification allocatable product; CPC 8612: Animal husbandry services
  production volume 443678 unit
  properties: carbon allocation 0 kg, carbon content 0, price 417.273 EUR2005

## Inputs from technosphere
- chemical, organic: 4.57 kg; lognormal variance with pedigree 0.0033, pedigree (3,2,5,1,2)
  properties: carbon content, fossil 0.628, dry mass 1 kg, heating value, net 19.03 MJ, wet mass 1 kg
- electricity, low voltage: 981.94 kWh; lognormal variance with pedigree 0.0013, pedigree (2,2,5,1,1)
- housing system, cattle, loose, per animal unit: 0.0333 unit; lognormal variance with pedigree 0.3027, pedigree (2,2,5,5,1)
- lubricating oil: 0.26 kg; lognormal variance with pedigree 0.0027, pedigree (2,2,5,5,1)
  properties: carbon content, fossil 0.75, dry mass 1 kg, heating value, net 40.2 MJ, wet mass 1 kg
- soda ash, light: 4.48 kg; lognormal variance with pedigree 0.0033, pedigree (3,2,5,1,2)
  properties: carbon content, fossil 0.0517241, dry mass 1 kg, heating value, net 3.43 MJ, wet mass 1 kg
- sodium metasilicate pentahydrate, 58% active substance, powder: 2.63 kg; lognormal variance with pedigree 0.0033, pedigree (3,2,5,1,2)
  properties: dry mass 1 kg, heating value, net 5.71 MJ, wet mass 1 kg
- tap water: 46712.6 kg; lognormal variance with pedigree 0.0013, pedigree (2,2,5,1,1)
  properties: carbon content, fossil 0.00178991, dry mass 0.000337476 kg, water content 2962.17, wet mass 1 kg
- water, deionised: 2.31 kg; lognormal variance with pedigree 0.0013, pedigree (2,2,5,1,1)
  properties: wet mass 1 kg

## Emissions to nature
- Water [air, unspecified]: 6.0303 m3; lognormal variance with pedigree 0.0427, pedigree (2,2,5,5,1)
- Water [water, unspecified]: 34.1717 m3; lognormal variance with pedigree 0.0427, pedigree (2,2,5,5,1)

## Sampling procedure
In the use of energy and auxiliary materials are big differences between the farms.The inventory is based on mean values from CH and WEU.
