# electricity production, hard coal

Dataset: EcoSpold 2, unit process
Geography: IN-MH
Time period: 1980-01-01 to 2022-12-31
Technology level: modern
Classification: EcoSpold01Categories: hard coal/power plants
Classification: ISIC rev.4 ecoinvent: 3510:Electric power generation, transmission and distribution
Synonyms: other bituminous coal; anthracite; coking coal
Tags: fossil fuels; hard coal power; coal power; India
Scenario: Business-as-Usual
System model: Substitution, consequential, long-term
Generated by: Muhammed Noor Hossain
Published in: Hossain, Muhammed Noor 2016
Database: ecoinvent
isCopyrightProtected: true
accessRestrictedTo: 1

## General comment
This dataset represents the production of high voltage electricity in an average hard coal power plant in India - Maharashtra (a state/union territory in India) in 2012. "Hard coal" includes anthracite, coking coal and other bituminous coal according to the definition of the IEA electricity information 2014. According to the Indian Energy Statistics, coals with a gross calorific value (moist, ash-free basis) which is not less than 24 MJ/kg or which is less than 24 MJ/kg provided that the coal has a vitrinite mean random reflectance greater than or equal to 0.6 per cent is considered as hard coal (CSO, 2015). This dataset is created as a child of the global dataset, i.e. some of the values are inherited from the global dataset and some are country-specific. Following values are edited, because they are country specific: the annual production volume, input of fuel, thermal efficiency of the power plant, emissions of CO2, CO, CH4, NO2, SO2, NMVOC, and Particulates.
Parameter data were used as an average value to represent a state/union territory. This average values are collected from Guttikunda and Jawahar 2014.
Comments on the inventory data of emissions:
Emission data, like parameter data, were used as an average value to represent a state/unioin territory. CO2, SOx, NOx, CO, CH4, VOC and Particulate Matter (PM) emission data were calculated using India specific parameter data (emission factor and input of fuel). All the other emissions were production-weighted averages of the figures in the datasets in ecoinvent version two, which are valid for the following 14 countries: AT, BE, ES, FR, IT, NL, PT, DE, CZ, HR, PL, SK, CN, US.
- The size distribution of particle emissions has been derived from German data.
- Halogene emissions have been estimated on the basis of the content of the species in the country-specific coal input mix, assuming average retention rates.
Indian hard coal electricity plants usually do not use De-SOx and De-NOx filter technologies. Therefore, the SOx retained and NOx retained exchanges in the inventory have been set to 0.
Emission of uranium and thorium radioactive isotopes were assumed proportional to the corresponding element emitted with particles; the other non-gaseous radioactive isotopes of the uranium and thorium decay chain were assumed proportional to the emitted U-238 or Th-232.
The emission of gaseous radon and K-40 are taken from the literature.
Sources:
IEA. 2014. Electricity Information 2014. ISBN 978-92-64-21692-1. International Energy Agency (IEA), Paris Cedex (FR)
European Environment Agency (1991) CORINAIR Inventory; VOC"s Default Emission Factors
Guttikunda, S. K., & Jawahar, P. (2014). Atmospheric emissions and pollution from the coal-fired thermal power plants in India. Atmospheric Environment(92), 449-460
Dones, R., Bauer, C., Röder, A. (2007) Kohle. In: Dones, R. (Ed.) et al., Sachbilanzen von Energiesystemen: Grundlagen für den ökologischen Vergleich von Energiesystemen und den Einbezug von Energiesystemen in Ökobilanzen für die Schweiz. Final report ecoinvent No.
CSO (2015). Energy Statistics. Central Statistics Office, Government of India.
[This dataset is meant to replace the following datasets:
- electricity production, hard coal, IN, 1980 - 2015]

## Included activities start
From the constructed hard coal power plant ready to produce electricity.
From reception of hard coal and operating materials at power plant gate.

## Included activities end
This activity ends with 1kWh of high voltage electricity produced at the power plant and arrived at the busbar.

This dataset includes:
- all operation and maintenance activities and materials of the power plants.
- Use of fuel oil for startup
- Particle removal (dedusting of the flue gas)

- Desulfurisation and denitrification. These processes are described in separate modules; it can be decided by changing the values of NOx and SOx retained whether and how much DeNOx and DeSOx are installed.
- Cooling: It is assumed that all plants use wet cooling with a cooling tower. No cooling tower is included in this dataset (will be implemented in future versions)
- Loss of feed water

This dataset doesn"t include
- raw materials extraction, decommissioning and waste treatment as these activities are already included in the infrastructure datasets
- transformation of the electricity produced
- The disposal of non-recycled ashes is modelled separately.

## Technology
POWER PLANT:
Hard coal power plant input is a market mix of 100MWe power plants (representing all power plants with a capacity <250MWe and 7% of the installed capacity) and 500MWe power plants (representing all power plants with a capacity >250MWe and 93% of the installed capacity). The plants are used for middle load with 4000 hours of operation at full capacity per year. The plants are assumed to operate 150000 hours during its lifetime.

## Time period
The Annual Production Volume data for the period 01.04.2012 - 31.03.2013.

## Parameters
- efficiency: 0.256062 dimensionless; = 3.6/ factor_MJ_kWh; lognormal variance with pedigree 0.003325, pedigree (3,2,1,2,2)
  Calculated value. Efficiency is calculated as 1*3.6/input of fuel for the production of 1 kWh.
- factor: input of MJ for the production of 1 kWh: 14.0591 MJ/kWh; name factor_MJ_kWh; = hard_coal* net_cal_value
  Calculated value. Calculated as a product of hard coal consumption and net calorific value (19.259 MJ/kg) of the fuel. State/Union territory wise fuel consumption data were extracted from (Guttikunda and Jawahar 2014) and net alorific value of hard coal is extracted from ( Indian Energy Statistics 2015). Guttikunda, S. K., & Jawahar, P. (2014). Atmospheric emissions and pollution from the coal-fired thermal power plants in India. Atmospheric Environment (92), 449-460. CSO. 2015. Energy Statistics. Central Statistics Office, Government of India, page 75 retrieved on Dec 7, 2016 from http://www.indiaenvironmentportal.org.in/files/file/Energy_stats_2015_0.pdf.
- fraction, cooling water, to air: 0.0299662 dimensionless; name fraction_CW_to_air; = (WConsumption_EP_HC_recirculatingCS*recirculating_CS_fraction_from_allCS+WConsumption_EP_HC_once_through_andCP_CS*once_through_andCP_CS_fractio_from_allCS)/(WWithdrawal_EP_HC_recirculating_CS*recirculating_CS_fraction_from_allCS+WWithdrawal_EP_HC_once_through_andCP_CS*once_through_andCP_CS_fractio_from_allCS); lognormal variance with pedigree 0.092025, pedigree (4,4,3,2,4)
  Calculated
  nan
- fraction, process water, to air: 0.15 dimensionless; name fraction_PW_to_air; lognormal variance with pedigree 0.092025, pedigree (4,4,3,2,4)
  Literature value. In case when no industry/process specific data are available, default evaporation fraction value is used. This value is 15% and is based on literature (Statistics Canada, 2007 & Shaffer, K.H., 2008, Consumptive water use in the Great Lakes Basin, USGS & Shiklomanov, 2003, World Water Resources at the Beginning of the 21st Century) and has been approved by an expert.
  nan
- fraction, water, completely softened, to air: 0.15 dimensionless; name fraction_WCS_to_air; = fraction_PW_to_air; lognormal variance with pedigree 0.092025, pedigree (4,4,3,2,4)
  Calculated value. See comment in the other parametres present in this dataset. Water, completely softened is considered to be always used as process water, thus process water fractions to air are applied to all water, completely softened input flows to calculate the amount of water consumed in the processes.
  nan
- fraction, water, decarbonised, to air: 0.0299662 dimensionless; name fraction_WDC_to_air; = fraction_CW_to_air; lognormal variance with pedigree 0.092025, pedigree (4,4,3,2,4)
  Calculated value. See comments in the other parametres present in this dataset. Decarbonised water is considered to be always used as cooling water, thus cooling water fractions to air are applied to all carbonised water input flows to calculate the amount of water consumed in the processes.
  nan
- gross electricity production: 6.62335e10 kWh; name gross_electricity; lognormal variance with pedigree 0.003325, pedigree (3,2,1,2,2)
  Literature and calculated value. Annual production volume data were extracted from the annual thermal electricity generation report of Central Electricity Authority, India (CEA, 2013). The Annual Production Volume is for the time period of 01.04.2012 - 31.03.2013 since CEA documents annual electricity production data for the mentioned time period.
  CEA. (2013). Region Wise, State Wise, Sector Wise, Type Wise, Station Wise, Unit Wise Generation Report For 31-Mar-2013. Central Electricity Authority (CEA). Retrieved from 04 December, 2016 http://cea.nic.in/reports/daily/dgr/2013/March/31/dgr2.pdf
- losses from gross electricity production: 0.08 dimensionless; name losses_gross_net; lognormal variance with pedigree 0.003325, pedigree (3,2,1,2,2)
  Literature value. Own use of electricity plants in this State/Union Territory in 2012. The default loss as described by the CEA CO2 Baseline Database for the Indian Power Sector is applied, which is 8%. CEA. (2014). CO2 Baseline Database for the Indian Power Sector. User Guide, Ministry of Power, Government of India, New Delhi. Retrieved 12 04, 2016, from http://cea.nic.in/reports/others/thermal/tpece/cdm_co2/user_guide_ver10.pdf
- net calorific value: 19.259 MJ/kg; name net_cal_value; lognormal variance with pedigree 0.003325, pedigree (3,2,1,2,2)
  Literature Value. Net calorific value of hard coal is extracted from ( Indian Energy Statistics 2015). Energy Statistics. Central Statistics Office, Government of India, page 75 retrieved on Dec 7, 2016 from http://www.indiaenvironmentportal.org.in/files/file/Energy_stats_2015_0.pdf.
- once-through and cooling pond cooling systems as a fraction of all cooling syste: 0.625 dimensionless; name once_through_andCP_CS_fractio_from_allCS; lognormal variance with pedigree 0.092025, pedigree (4,4,3,2,4)
  Calculated as an average of data available for Europe (Floerke, 2008, Future changes of freshwater needs in the electricity production sector) and USA (NERL, 2011, Estimating freshwater needs to meet future thermoelectric generation requirements).
  nan
- recirculating cooling system as a fraction of all cooling systems: 0.375 dimensionless; name recirculating_CS_fraction_from_allCS; lognormal variance with pedigree 0.092025, pedigree (4,4,3,2,4)
  (same comment as for once-through and cooling pond cooling systems as a fraction of all coo)
- water consumption, electricity production from hard coal, once-through and cooli: 0.0014 m3/kWh; name WConsumption_EP_HC_once_through_andCP_CS; lognormal variance with pedigree 0.092025, pedigree (4,4,3,2,4)
  Estimated based on literature (Scown, 2011, Water Footprint of U.S. Transportation Fuels, SI). The amount of water consumed while burning lignite and peat is assumed to be the same as in case of coal.
  nan
- water consumption, electricity production from hard coal, recirculating CS: 0.0018 m3/kWh; name WConsumption_EP_HC_recirculatingCS; lognormal variance with pedigree 0.092025, pedigree (4,4,3,2,4)
  (same comment as for water consumption, electricity production from hard coal, once-through)
- water withdrawal, electricity production from hard coal, once-through and coolin: 0.0815 m3/kWh; name WWithdrawal_EP_HC_once_through_andCP_CS; lognormal variance with pedigree 0.092025, pedigree (4,4,3,2,4)
  Estimated based on literature (Scown, 2011, Water Footprint of U.S. Transportation Fuels, SI). The amount of water withdrawn while burning lignite and peat is assumed to be the same as in case of coal.
  nan
- water withdrawal, electricity production from hard coal, recirculating CS: 0.0021 m3/kWh; name WWithdrawal_EP_HC_recirculating_CS; lognormal variance with pedigree 0.092025, pedigree (4,4,3,2,4)
  (same comment as for water withdrawal, electricity production from hard coal, once-through )

## Reference product
- electricity, high voltage: 1 kWh; By-product classification allocatable product; CPC 17100: Electrical energy
  production volume 6.58254e10 kWh
  properties: carbon allocation 0 kg, carbon content 0, price 0.0977 EUR2005

## Inputs from technosphere
- hard coal: 0.73 kg; lognormal variance with pedigree 0.003225, pedigree (3,1,3,2,2)
  properties: carbon content, fossil 0.845, dry mass 0.94 kg, heating value, net 27.91 MJ, water content 0.0638298, wet mass 1 kg
- hard coal ash: -0.105162 kg; lognormal variance with pedigree 0.0926, pedigree (5,3,3,5,3)
  properties: dry mass 1 kg, wet mass 1 kg
- hard coal power plant: 1.33333e-11 unit; lognormal variance with pedigree 0.3626, pedigree (5,3,5,5,3)
- light fuel oil: 0.000239004 kg; lognormal variance with pedigree 0.018, pedigree (3,4,5,5,1)
  properties: carbon content, fossil 0.862, dry mass 1 kg, heating value, net 42.6 MJ, wet mass 1 kg
- residue from cooling tower: -7.73249e-5 kg; lognormal variance with pedigree 0.0752, pedigree (5,3,3,5,2)
  properties: carbon content, fossil 0.0544233, dry mass 0.7 kg, water content 0.428571, wet mass 1 kg
- water, completely softened: 0.0843544 kg; lognormal variance with pedigree 0.048, pedigree (4,5,5,5,3)
  properties: wet mass 1 kg
- water, decarbonised: 2.81181 kg; lognormal variance with pedigree 0.048, pedigree (4,5,5,5,3)
  properties: wet mass 1 kg

## Inputs from nature
- Water, cooling, unspecified natural origin [natural resource, in water]: 0.0642976 m3; lognormal variance with pedigree 0.092025, pedigree (4,4,5,2,4)

## Emissions to nature
- Acenaphthene [air, non-urban air or from high stacks]: 5.90481e-11 kg; lognormal variance with pedigree 0.1346, pedigree (3,3,5,5,3)
- Acrolein [air, non-urban air or from high stacks]: 3.36012e-8 kg; lognormal variance with pedigree 0.3526, pedigree (5,3,5,5,3)
- Actinides, radioactive, unspecified [air, non-urban air or from high stacks]: 0.00024041 kBq; lognormal variance with pedigree 0.3146, pedigree (3,3,5,5,3)
- Aldehydes, unspecified [air, non-urban air or from high stacks]: 1.10083e-7 kg; lognormal variance with pedigree 0.1346, pedigree (3,3,5,5,3)
- Antimony ion [air, non-urban air or from high stacks]: 1.68709e-8 kg; lognormal variance with pedigree 0.7426, pedigree (5,3,5,5,3)
- Arsenic ion [air, non-urban air or from high stacks]: 1.40169e-7 kg; lognormal variance with pedigree 0.7426, pedigree (5,3,5,5,3)
- Barium II [air, non-urban air or from high stacks]: 9.12434e-7 kg; lognormal variance with pedigree 0.7426, pedigree (5,3,5,5,3)
- Benzene [air, non-urban air or from high stacks]: 1.95421e-6 kg; lognormal variance with pedigree 0.082, pedigree (3,5,5,5,3)
- Benzene, ethyl- [air, non-urban air or from high stacks]: 1.08958e-8 kg; lognormal variance with pedigree 0.1346, pedigree (3,3,5,5,3)
- Benzo(a)pyrene [air, non-urban air or from high stacks]: 6.05946e-12 kg; lognormal variance with pedigree 0.074, pedigree (3,5,5,5,1)
- Beryllium II [air, non-urban air or from high stacks]: 2.43222e-9 kg; lognormal variance with pedigree 0.6646, pedigree (3,3,5,5,3)
- Boron [air, non-urban air or from high stacks]: 5.38462e-6 kg; lognormal variance with pedigree 0.7426, pedigree (5,3,5,5,3)
- Bromine [air, non-urban air or from high stacks]: 4.40049e-6 kg; lognormal variance with pedigree 0.1746, pedigree (3,3,5,5,3)
- Butane [air, non-urban air or from high stacks]: 1.57462e-7 kg; lognormal variance with pedigree 0.074, pedigree (3,5,5,5,1)
- Cadmium II [air, non-urban air or from high stacks]: 1.46214e-8 kg; lognormal variance with pedigree 0.7426, pedigree (5,3,5,5,3)
- Carbon dioxide, fossil [air, non-urban air or from high stacks]: 1.34686 kg; lognormal variance with pedigree 0.002625, pedigree (3,1,3,2,2)
- Carbon disulfide [air, non-urban air or from high stacks]: 1.50432e-8 kg; lognormal variance with pedigree 0.3146, pedigree (3,3,5,5,3)
- Carbon monoxide, fossil [air, non-urban air or from high stacks]: 0.00140591 kg; lognormal variance with pedigree 0.6626, pedigree (3,1,3,2,2)
- Chloroform [air, non-urban air or from high stacks]: 1.13597e-8 kg; lognormal variance with pedigree 0.1346, pedigree (3,3,5,5,3)
- Chromium III [air, non-urban air or from high stacks]: 1.15284e-7 kg; lognormal variance with pedigree 0.7426, pedigree (5,3,5,5,3)
- Chromium VI [air, non-urban air or from high stacks]: 1.96827e-8 kg; lognormal variance with pedigree 0.4946, pedigree (3,3,5,5,3)
- Cobalt II [air, non-urban air or from high stacks]: 4.69573e-8 kg; lognormal variance with pedigree 0.7426, pedigree (5,3,5,5,3)
- Copper ion [air, non-urban air or from high stacks]: 1.15425e-7 kg; lognormal variance with pedigree 0.7426, pedigree (5,3,5,5,3)
- Cumene [air, non-urban air or from high stacks]: 6.31252e-10 kg; lognormal variance with pedigree 0.122, pedigree (1,1,3,5,1)
- Cyanide [air, non-urban air or from high stacks]: 2.89617e-7 kg; lognormal variance with pedigree 0.1726, pedigree (5,3,5,5,3)
- Dinitrogen monoxide [air, non-urban air or from high stacks]: 1.8558e-5 kg; lognormal variance with pedigree 0.068, pedigree (3,4,5,5,1)
- Dioxins, measured as 2,3,7,8-tetrachlorodibenzo-p-dioxin [air, non-urban air or from high stacks]: 1.49026e-13 kg; lognormal variance with pedigree 0.334, pedigree (3,5,5,5,1)
- Ethane [air, non-urban air or from high stacks]: 3.41635e-7 kg; lognormal variance with pedigree 0.074, pedigree (3,5,5,5,1)
- Ethane, 1,1,1-trichloro-, HCFC-140 [air, non-urban air or from high stacks]: 2.31975e-9 kg; lognormal variance with pedigree 0.1346, pedigree (3,3,5,5,3)
- Ethane, 1,2-dichloro- [air, non-urban air or from high stacks]: 4.62543e-9 kg; lognormal variance with pedigree 0.1726, pedigree (5,3,5,5,3)
- Formaldehyde [air, non-urban air or from high stacks]: 5.10344e-7 kg; lognormal variance with pedigree 0.074, pedigree (3,5,5,5,1)
- Furan [air, non-urban air or from high stacks]: 5.79234e-13 kg; lognormal variance with pedigree 0.1346, pedigree (3,3,5,5,3)
- Hexane [air, non-urban air or from high stacks]: 7.80278e-9 kg; lognormal variance with pedigree 0.1726, pedigree (5,3,5,5,3)
- Hydrocarbons, aliphatic, alkanes, cyclic [air, non-urban air or from high stacks]: 6.70618e-8 kg; lognormal variance with pedigree 0.1346, pedigree (3,3,5,5,3)
- Hydrocarbons, aliphatic, alkanes, unspecified [air, non-urban air or from high stacks]: 1.89797e-6 kg; lognormal variance with pedigree 0.074, pedigree (3,5,5,5,1)
- Hydrocarbons, aliphatic, unsaturated [air, non-urban air or from high stacks]: 1.79956e-6 kg; lognormal variance with pedigree 0.074, pedigree (3,5,5,5,1)
- Hydrocarbons, chlorinated [air, non-urban air or from high stacks]: 2.34786e-8 kg; lognormal variance with pedigree 0.1726, pedigree (5,3,5,5,3)
- Hydrochloric acid [air, non-urban air or from high stacks]: 0.000372565 kg; lognormal variance with pedigree 0.2126, pedigree (5,3,5,5,3)
- Hydrogen fluoride [air, non-urban air or from high stacks]: 3.97872e-5 kg; lognormal variance with pedigree 0.2126, pedigree (5,3,5,5,3)
- Iodine [air, non-urban air or from high stacks]: 2.23539e-6 kg; lognormal variance with pedigree 0.2126, pedigree (5,3,5,5,3)
- Lead II [air, non-urban air or from high stacks]: 5.21591e-7 kg; lognormal variance with pedigree 0.7426, pedigree (5,3,5,5,3)
- Lead-210 [air, non-urban air or from high stacks]: 0.000974294 kBq; lognormal variance with pedigree 0.3926, pedigree (5,3,5,5,3)
- Magnesium [air, non-urban air or from high stacks]: 1.27375e-6 kg; lognormal variance with pedigree 0.7026, pedigree (5,3,5,5,3)
- Manganese II [air, non-urban air or from high stacks]: 5.03315e-7 kg; lognormal variance with pedigree 0.7426, pedigree (5,3,5,5,3)
- Mercury II [air, non-urban air or from high stacks]: 3.79595e-8 kg; lognormal variance with pedigree 0.7426, pedigree (5,3,5,5,3)
- Methane, dichloro-, HCC-30 [air, non-urban air or from high stacks]: 3.36012e-8 kg; lognormal variance with pedigree 0.1726, pedigree (5,3,5,5,3)
- Methane, fossil [air, non-urban air or from high stacks]: 1.12473e-5 kg; lognormal variance with pedigree 0.06263, pedigree (3,1,3,2,2)
- Methane, monochloro-, R-40 [air, non-urban air or from high stacks]: 6.14381e-8 kg; lognormal variance with pedigree 0.1346, pedigree (3,3,5,5,3)
- Molybdenum VI [air, non-urban air or from high stacks]: 1.61679e-8 kg; lognormal variance with pedigree 0.7426, pedigree (5,3,5,5,3)
- NMVOC, non-methane volatile organic compounds [air, non-urban air or from high stacks]: 0.000126532 kg; lognormal variance with pedigree 0.1226, pedigree (3,1,3,2,2)
- Nickel II [air, non-urban air or from high stacks]: 2.81181e-7 kg; lognormal variance with pedigree 0.7426, pedigree (5,3,5,5,3)
- Nitrogen oxides [air, non-urban air or from high stacks]: 0.00265716 kg; lognormal variance with pedigree 0.003625, pedigree (3,1,3,2,2)
- PAH, polycyclic aromatic hydrocarbons [air, non-urban air or from high stacks]: 1.05302e-7 kg; lognormal variance with pedigree 0.334, pedigree (3,5,5,5,1)
- Particulate Matter, < 2.5 um [air, non-urban air or from high stacks]: 0.00246174 kg; lognormal variance with pedigree 0.003625, pedigree (3,1,3,2,2)
- Particulate Matter, > 10 um [air, non-urban air or from high stacks]: 0.000144808 kg; lognormal variance with pedigree 0.003625, pedigree (3,1,3,2,2)
- Particulate Matter, > 2.5 um and < 10um [air, non-urban air or from high stacks]: 0.000289617 kg; lognormal variance with pedigree 0.003625, pedigree (3,1,3,2,2)
- Pentane [air, non-urban air or from high stacks]: 1.22314e-6 kg; lognormal variance with pedigree 0.074, pedigree (3,5,5,5,1)
- Phenol [air, non-urban air or from high stacks]: 1.8558e-9 kg; lognormal variance with pedigree 0.1346, pedigree (3,3,5,5,3)
- Polonium-210 [air, non-urban air or from high stacks]: 0.00172927 kBq; lognormal variance with pedigree 0.3926, pedigree (5,3,5,5,3)
- Potassium-40 [air, non-urban air or from high stacks]: 0.000323359 kBq; lognormal variance with pedigree 0.3926, pedigree (5,3,5,5,3)
- Propane [air, non-urban air or from high stacks]: 2.91023e-7 kg; lognormal variance with pedigree 0.074, pedigree (3,5,5,5,1)
- Propene [air, non-urban air or from high stacks]: 1.33139e-7 kg; lognormal variance with pedigree 0.074, pedigree (3,5,5,5,1)
- Protactinium-234 [air, non-urban air or from high stacks]: 1.44808e-5 kBq; lognormal variance with pedigree 0.3146, pedigree (3,3,5,5,3)
- Radium-226 [air, non-urban air or from high stacks]: 0.000257281 kBq; lognormal variance with pedigree 0.3907, pedigree (3,3,5,3,3)
- Radium-228 [air, non-urban air or from high stacks]: 8.30891e-5 kBq; lognormal variance with pedigree 0.3926, pedigree (5,3,5,5,3)
- Radon-220 [air, non-urban air or from high stacks]: 0.00712795 kBq; lognormal variance with pedigree 0.3926, pedigree (5,3,5,5,3)
- Radon-222 [air, non-urban air or from high stacks]: 0.00700142 kBq; lognormal variance with pedigree 0.3926, pedigree (5,3,5,5,3)
- Selenium IV [air, non-urban air or from high stacks]: 2.31975e-7 kg; lognormal variance with pedigree 0.7426, pedigree (5,3,5,5,3)
- Strontium [air, non-urban air or from high stacks]: 8.32297e-7 kg; lognormal variance with pedigree 0.7426, pedigree (5,3,5,5,3)
- Styrene [air, non-urban air or from high stacks]: 2.86805e-9 kg; lognormal variance with pedigree 0.1346, pedigree (3,3,5,5,3)
- Sulfate [air, non-urban air or from high stacks]: 5.53927e-9 kg; lognormal variance with pedigree 0.1726, pedigree (5,3,5,5,3)
- Sulfur dioxide [air, non-urban air or from high stacks]: 0.00269934 kg; lognormal variance with pedigree 0.003625, pedigree (3,1,3,2,2)
- Tetrachloroethylene [air, non-urban air or from high stacks]: 4.97691e-9 kg; lognormal variance with pedigree 0.1726, pedigree (5,3,5,5,3)
- Thorium-228 [air, non-urban air or from high stacks]: 4.63949e-5 kBq; lognormal variance with pedigree 0.3926, pedigree (5,3,5,5,3)
- Thorium-230 [air, non-urban air or from high stacks]: 1.44808e-5 kBq; lognormal variance with pedigree 0.3526, pedigree (5,3,5,5,3)
- Thorium-232 [air, non-urban air or from high stacks]: 6.79053e-5 kBq; lognormal variance with pedigree 0.3926, pedigree (5,3,5,5,3)
- Thorium-234 [air, non-urban air or from high stacks]: 1.44808e-5 kBq; lognormal variance with pedigree 0.3146, pedigree (3,3,5,5,3)
- Toluene [air, non-urban air or from high stacks]: 9.34928e-7 kg; lognormal variance with pedigree 0.074, pedigree (3,5,5,5,1)
- Uranium-234 [air, non-urban air or from high stacks]: 2.83993e-5 kBq; lognormal variance with pedigree 0.3526, pedigree (5,3,5,5,3)
- Uranium-238 [air, non-urban air or from high stacks]: 0.000223539 kBq; lognormal variance with pedigree 0.3926, pedigree (5,3,5,5,3)
- Vanadium V [air, non-urban air or from high stacks]: 2.08074e-7 kg; lognormal variance with pedigree 0.7426, pedigree (5,3,5,5,3)
- Water [air, unspecified]: 0.00202366 m3; lognormal variance with pedigree 0.092025, pedigree (4,4,5,2,4)
- Xylene [air, non-urban air or from high stacks]: 7.67625e-6 kg; lognormal variance with pedigree 0.074, pedigree (3,5,5,5,1)
- Zinc II [air, non-urban air or from high stacks]: 5.84857e-7 kg; lognormal variance with pedigree 0.7426, pedigree (5,3,5,5,3)
- Water [water, unspecified]: 0.0651701 m3; lognormal variance with pedigree 0.092025, pedigree (4,4,5,2,4)

## Sampling procedure
The inventory is generated using statistical data, literature data and modelling.

## Extrapolations
Data from 1993 have been updated for the years 2000 (v1.0), and 2004-2005 (v2.0). Uncertainty was adjusted accordingly.

Most of the exchanges were extrapolated through production-weighted averages of the datasets of the following 14 countries: AT, BE, ES, FR, IT, NL, PT, DE, CZ, HR, PL, SK, CN, US.

The original data were valid for the burning of 1MJ of hard coal. In this dataset, the values are scaled to the net output of 1kWh of electricity, based on the electrical efficiency.The inventory is generated using statistical data, literature data and modelling.

## Review by Karin Treyer 2016-12-20
This dataset has been produced in a project on regionalisation of the Indian electricity mix on a states level. In general, only key parameters have been adjusted to region-specific conditions, such as the electrical efficiency, power plants own use of electricity (losses from gross to net electricity), hard coal input, and key emissions. Whenever more accurate data will be available e.g. on further emissions, these should be included in this dataset.
