# tap water production, underground water with chemical treatment

Dataset: EcoSpold 2, unit process
Geography: RoW
Time period: 2012-01-01 to 2022-12-31
Technology level: current
Classification: EcoSpold01Categories: water supply/production
Classification: ISIC rev.4 ecoinvent: 3600:Water collection, treatment and supply
Synonyms: potable water
Tags: single enterprise data
Scenario: Business-as-Usual
System model: Substitution, consequential, long-term
Generated by: Marylène Dussault
Database: ecoinvent
isCopyrightProtected: true
accessRestrictedTo: 1

## General comment
This dataset represents production of 1 kg of tap water under pressure at facility gate, ready for distribution in network. It represents average operation of tap water from underground water with chemical treatments. Water is pumped from aquifer, chemically enhanced (e.g. corosion inhibitor, ph, chloration, etc.) and pressurized for distribution. Inventory was constructed from reported energy inputs and wastes from a single plant located in Québec assumed to represent 8% of total production of tap water from this technology.
[This dataset is meant to replace the following datasets:
- tap water production and supply, GLO, 2000 - 2000]

## Included activities start
From the intake pumping of raw surface water into the water treatment plant.

## Included activities end
This dataset ends with the production of tap water, at facility gate, under pressure. It includes energy for intake pumping, lighting and heating of the building as well as the energy of the pump pressurizing water to the beginning of the network. Infrastructure for the facility is estimated. It excludes energy for pumping stations and water losses within the network which is included in the tap water market. Emissions to the environment occurring during the treatment and during the distribution were not considered as they are assumed negligible. Main substance in water that would be released in the environment are assumed to be considered in wastewater processes.

## Geography
Extrapolated from data from a single plant in Quebec (Canada).The uncertainty was adjusted accordingly.

## Time period
Time of publication.

## Reference product
- tap water: 1 kg; By-product classification allocatable product; CPC 18000: Natural water
  production volume 1.04913e14 kg
  properties: carbon allocation 6.08566e-7 kg, carbon content 0.0017899, carbon content, fossil 0.0017899, carbon content, non-fossil 0, dry mass 0.00034 kg, price 0.000397 EUR2005, water content 2940.18, water in wet mass 0.99966 kg, wet mass 1 kg

## Inputs from technosphere
- diesel, burned in building machine: 5.29805e-5 MJ; lognormal variance with pedigree 0, pedigree (1,1,4,1,1)
  properties: density 0.84 kg/l, fuel input in physical units, L 1.46e-6 l, heating value, net 1 MJ
- electricity, medium voltage: 1.24345e-5, 2.36296e-5, 1.41205e-5, 0.000354334, 2.84342e-7, 1.35518e-6, 1.59125e-6, 4.12804e-7, 9.56196e-5, 3.19955e-6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 kWh (45 suppliers, which the file names only by identifier); sum of these 0.000841 kWh; lognormal variance with pedigree 0.0038, pedigree (2,3,4,5,1)
- pump station: 2.0568e-11 unit; lognormal variance with pedigree 0.045, pedigree (5,4,4,5,1)
- sodium hydroxide, without water, in 50% solution state: 5.9524e-6 kg; lognormal variance with pedigree 0.0052, pedigree (2,4,4,5,1)
  properties: dry mass 1 kg, heating value, net 3.03 MJ, wet mass 1 kg
- sodium hypochlorite, without water, in 15% solution state: 1.2e-6 kg; lognormal variance with pedigree 0.0052, pedigree (2,4,4,5,1)
  properties: dry mass 1 kg, wet mass 1 kg
- sodium pyrophosphate: 8.12435e-7 kg; lognormal variance with pedigree 0.0052, pedigree (2,4,4,5,1)
- sodium silicate, solid: 8.54444e-7 kg; lognormal variance with pedigree 0.0038, pedigree (2,4,4,4,1)
  properties: dry mass 1 kg, wet mass 1 kg
- sodium tripolyphosphate: 7.91365e-7 kg; lognormal variance with pedigree 0.0052, pedigree (2,4,4,5,1)
  properties: dry mass 1 kg, wet mass 1 kg
- tap water: 2.85068e-6, 1.00218e-6, 7.67952e-6, 1.52774e-6, 1.10668e-5 kg (5 suppliers, which the file names only by identifier); sum of these 2.41269e-5 kg; lognormal variance with pedigree 0.0052, pedigree (3,3,4,5,1)
  properties: carbon content, fossil 0.00178991, dry mass 0.000337476 kg, water content 2962.17, wet mass 1 kg

## Inputs from nature
- Water, well, in ground [natural resource, in water]: 0.001 m3

## Sampling procedure
Based on data collected from a treatment plant using underground water and chemical treatment in Quebec (Canada). See corresponding Quebec dataset for more information. Note that percent representativeness is not supplied because technology-specific global production volumes is too uncertain. Should this information become available, the representativeness can be calculated by dividing the sum of the water treated by the Quebec plants that served as a basis for the Global dataset by the technology-specific global production volume. (9.74E9 kg/a)

## Extrapolations
From one underground water with chemical treatment tap water production facility in Quebec (Canada) to global average of same technology. The uncertainty has been changed accordingly.
