# coconut oil production, crude

Dataset: EcoSpold 2, unit process
Geography: RoW
Time period: 1995-01-01 to 2022-12-31
Technology level: current
Classification: EcoSpold01Categories: chemicals/organics
Classification: ISIC rev.4 ecoinvent: 1040:Manufacture of vegetable and animal oils and fats
Tags: ConvertedDataset
Scenario: Business-as-Usual
System model: Substitution, consequential, long-term
Generated by: Roland Hischier
Published in: Zah R. 2004
Database: ecoinvent
isCopyrightProtected: true
accessRestrictedTo: 1

## General comment
data based on the ECOSOL study of the European surfactant industry. Allocations in multioutput processes were made, using the relative mass outputs of products.
[This dataset was already contained in the ecoinvent database version 2. It was not individually updated during the transfer to ecoinvent version 3. Life Cycle Impact Assessment results may still have changed, as they are affected by changes in the supply chain, i.e. in other datasets. This dataset was generated following the ecoinvent quality guidelines for version 2. It may have been subject to central changes described in the ecoinvent version 3 change report (http://www.ecoinvent.org/database/ecoinvent-version-3/reports-of-changes/), and the results of the central updates were reviewed extensively. The changes added e.g. consistent water flows and other information throughout the database. The documentation of this dataset can be found in the ecoinvent reports of version 2, which are still available via the ecoinvent website. The change report linked above covers all central changes that were made during the conversion process.]

## Included activities end
This module contains material and energy input, production of waste and emissions for the steps from the harvested coconuts to the crude coconut oil (i.e. the coconut halving, extraction of water, meat removal & shell production, drying and the oil extraction). Water consumption and infrastructure have been estimated.

## Geography
Data based on coconut oil mills in Phillippines

## Technology
Average technology, typical for Phillippines conditions in the mid 90s

## Time period
data of published literature

## Parameters
- fraction, cooling water, cooling pond system, to air: 0.032 dimensionless; name fraction_CW_CP_to_air; lognormal variance with pedigree 0.0413, pedigree (2,3,1,3,1)
  Calculated based on literature value (Scown, C.D., 2011, Water Footprint of U.S. Transportation Fuels and supplying information of the article) (Vionnet, S., Quantis Water Database - Technical Report, 2012).
- fraction, cooling water, once-through system, to air: 0.004 dimensionless; name fraction_CW_OT_to_air; lognormal variance with pedigree 0.0413, pedigree (2,3,1,3,1)
  (same comment as for fraction, cooling water, cooling pond system, to air)
- fraction, cooling water, recirculating system, to air: 0.771 dimensionless; name fraction_CW_R_to_air; lognormal variance with pedigree 0.0413, pedigree (2,3,1,3,1)
  (same comment as for fraction, cooling water, cooling pond system, to air)
- fraction, cooling water, to air: 0.3875 dimensionless; name fraction_CW_to_air; = (0.5*fraction_CW_OT_to_air)+(0.5*fraction_CW_R_to_air); lognormal variance with pedigree 0.092025, pedigree (4,4,3,2,4)
  Calculated value based on literature value (see comments of the other parametres present in this dataset) and expert opinion. In the case when no industry/literature data are available about the type of cooling or directly fraction, cooling water, to air specific for the process a default assumption is applied. It is assumed that the once-through cooling system is used in 50% of all cases and recirculating system is used in another 50% of all cases.
- fraction, process water, to air: 0.205 dimensionless; lognormal variance with pedigree 0.092025, pedigree (4,4,3,2,4)

## Reference product
- coconut oil, crude: 1 kg; By-product classification allocatable product; CPC 21661: Coconut oil, crude
  production volume 1.90619e9 kg
  properties: carbon allocation 0.75 kg, carbon content 0.75, carbon content, fossil 0, carbon content, non-fossil 0.75, dry mass 1 kg, heating value, net 38.4 MJ, price 0.596 EUR2005, water content 0, water in wet mass 0 kg, wet mass 1 kg

## Inputs from technosphere
- chemical factory, organics: 4e-10 unit; lognormal variance with pedigree 0.47, pedigree (5,5,5,5,4)
- coconut, dehusked: 2.97 kg
  properties: carbon content, non-fossil 0.708236, dry mass 0.691563 kg, water content 0.446, wet mass 1 kg
- electricity, medium voltage: 0.00192249, 0.00365334, 0.00218316, 0.054783, 4.39618e-5, 0.000209522, 0.00024602, 6.38231e-5, 0.0147836, 0.000494678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 kWh (46 suppliers, which the file names only by identifier); sum of these 0.172 kWh; lognormal variance with pedigree 0.0382, pedigree (4,5,5,5,1)
- heat, district or industrial, other than natural gas: 0.297 MJ; lognormal variance with pedigree 0.0382, pedigree (4,5,5,5,1)
  properties: heating value, net 1 MJ
- wood ash mixture, pure: -6.8838e-6, -0.000698243, -0.000334873 kg (3 suppliers, which the file names only by identifier); sum of these -0.00104 kg; lognormal variance with pedigree 0.0308, pedigree (2,5,2,5,1)
  properties: carbon content, non-fossil 0.012, dry mass 1 kg, wet mass 1 kg

## Inputs from nature
- Energy, gross calorific value, in biomass [natural resource, biotic]: 37.5 MJ
- Water, cooling, unspecified natural origin [natural resource, in water]: 0.024 m3; lognormal variance with pedigree 0.17, pedigree (5,5,5,5,4)
- Water, unspecified natural origin [natural resource, in water]: 0.006 m3; lognormal variance with pedigree 0.17, pedigree (5,5,5,5,4)

## Emissions to nature
- Carbon dioxide, non-fossil [air, urban air close to ground]: 0.268 kg; lognormal variance with pedigree 0.0308, pedigree (2,5,5,5,1)
- NMVOC, non-methane volatile organic compounds [air, urban air close to ground]: 0.0002 kg; lognormal variance with pedigree 0.0708, pedigree (2,5,5,5,1)
- Nitrogen oxides [air, urban air close to ground]: 8.8e-5 kg; lognormal variance with pedigree 0.0708, pedigree (2,5,5,5,1)
- Particulate Matter, < 2.5 um [air, urban air close to ground]: 0.000265 kg; lognormal variance with pedigree 0.3308, pedigree (2,5,5,5,1)
- Particulate Matter, > 10 um [air, urban air close to ground]: 0.000339 kg; lognormal variance with pedigree 0.0708, pedigree (2,5,5,5,1)
- Particulate Matter, > 2.5 um and < 10um [air, urban air close to ground]: 0.000456 kg; lognormal variance with pedigree 0.1408, pedigree (2,5,5,5,1)
- Sulfur dioxide [air, urban air close to ground]: 5.8e-5 kg; lognormal variance with pedigree 0.0308, pedigree (2,5,5,5,1)
- Water [air, unspecified]: 0.01053 m3; lognormal variance with pedigree 0.0427, pedigree (2,2,5,5,1)
- Acidity, unspecified [water, surface water]: 0.00479 kg
- BOD5, Biological Oxygen Demand [water, surface water]: 0.0138 kg; lognormal variance with pedigree 0.0708, pedigree (2,5,5,5,1)
- COD, Chemical Oxygen Demand [water, surface water]: 0.0138 kg; lognormal variance with pedigree 0.0708, pedigree (2,5,5,5,1)
- DOC, Dissolved Organic Carbon [water, surface water]: 0.00511111 kg; lognormal variance with pedigree 0.0708, pedigree (2,5,5,5,1)
- Dissolved solids [water, surface water]: 0.0416 kg; lognormal variance with pedigree 0.0708, pedigree (2,5,5,5,1)
- Nitrogen [water, surface water]: 0.00442 kg; lognormal variance with pedigree 0.0708, pedigree (2,5,5,5,1)
- Oils, unspecified [water, surface water]: 0.00442 kg; lognormal variance with pedigree 0.3308, pedigree (2,5,5,5,1)
- TOC, Total Organic Carbon [water, surface water]: 0.00511111 kg; lognormal variance with pedigree 0.0708, pedigree (2,5,5,5,1)
- Water [water, unspecified]: 0.01947 m3; lognormal variance with pedigree 0.0427, pedigree (2,2,5,5,1)

## Extrapolations
data out of ECOSOL study of European Surfactant Industry. Common translation rules used, reported in Chemical report (Althaus et al. 2003). This dataset has been copied from an original dataset covering the geography PH. The uncertainty has been adjusted accordingly.

## Review by Christian Capello 2005-07-19
energetic value of crude coconut oil has been added
