# ventilation components factory construction

Dataset: EcoSpold 2, unit process
Geography: RoW
Time period: 1998-01-01 to 2022-12-31
Technology level: current
Classification: ISIC rev.4 ecoinvent: 4290:Construction of other civil engineering projects
Classification: EcoSpold01Categories: ventilation/production of components
Tags: ConvertedDataset
Scenario: Business-as-Usual
System model: Substitution, consequential, long-term
Generated by: Alex Primas
Published in: Hässig, W. 2007
Database: ecoinvent
isCopyrightProtected: true
accessRestrictedTo: 1

## General comment
This infrastructure module represents an approximation for the infrastructure of an company producing metal parts an components for ventilation systems. Due to the approximation with data of only few companies this inventory has a high uncertainty.
[This dataset was already contained in the ecoinvent database version 2. It was not individually updated during the transfer to ecoinvent version 3. Life Cycle Impact Assessment results may still have changed, as they are affected by changes in the supply chain, i.e. in other datasets. This dataset was generated following the ecoinvent quality guidelines for version 2. It may have been subject to central changes described in the ecoinvent version 3 change report (http://www.ecoinvent.org/database/ecoinvent-version-3/reports-of-changes/), and the results of the central updates were reviewed extensively. The changes added e.g. consistent water flows and other information throughout the database. The documentation of this dataset can be found in the ecoinvent reports of version 2, which are still available via the ecoinvent website. The change report linked above covers all central changes that were made during the conversion process.]

## Included activities end
Process for building and production machine includes construction and disposal processes. Land use for plant included.

## Geography
Data for production in western Europe used.

## Technology
Building halls in steel construction for 70% of the built up area and 10 m high multi-storey buildings for 30% of the built up area of 50000 m2 assumed. The life time of the tanks was assumed to be 50 years. The production machines have an assumed life time of 25 years. The yearly production is 5000 t/a. Land use derived from environmental reports of different similar companies.

## Time period
Time of literature publication.

## Reference product
- ventilation components factory: 1 unit; By-product classification allocatable product; CPC 53269: Other constructions for manufacturing
  production volume 2.67763 unit
  properties: carbon allocation 0 kg, carbon content 0, price 2.43336e7 EUR2005

## Inputs from technosphere
- building, hall, steel construction: 35000 m2; lognormal variance with pedigree 0.056, pedigree (4,5,5,5,3)
- building, multi-storey: 150000 m3; lognormal variance with pedigree 0.032, pedigree (1,1,5,5,1)
- industrial machine, heavy, unspecified: 4.13e6 kg; lognormal variance with pedigree 0.056, pedigree (4,5,5,5,3)
- road, company, internal: 1.75e6 m2*year; lognormal variance with pedigree 0.064, pedigree (3,4,5,5,3)

## Inputs from nature
- Occupation, construction site [natural resource, land]: 100000 m2*year; lognormal variance with pedigree 0.0626, pedigree (2,4,5,5,3)
- Occupation, industrial area [natural resource, land]: 5e6 m2*year; lognormal variance with pedigree 0.0626, pedigree (2,4,5,5,3)
- Transformation, from unspecified [natural resource, land]: 100000 m2; lognormal variance with pedigree 0.1426, pedigree (2,4,5,5,3)
- Transformation, to industrial area [natural resource, land]: 100000 m2; lognormal variance with pedigree 0.1426, pedigree (2,4,5,5,3)

## Sampling procedure
Approximation with data from environmental reports and information of similar companies.

## Extrapolations
none This dataset has been copied from an original dataset covering the geography RER. The uncertainty has been adjusted accordingly.

## Review by Rolf Frischknecht 2007-08-16
passed
none
