# ozone production, liquid

Dataset: EcoSpold 2, unit process
Geography: RoW
Time period: 2000-01-01 to 2022-12-31
Technology level: current
Classification: ISIC rev.4 ecoinvent: 2011:Manufacture of basic chemicals
Synonyms: Ozone light work; 10028-15-6; Triatomic oxygen; Ozon; Ozone heavy work
Scenario: Business-as-Usual
System model: Substitution, consequential, long-term
Generated by: Roland Hischier
Published in: Hischier R. 2007
Database: ecoinvent
isCopyrightProtected: true
accessRestrictedTo: 1

## General comment
This dataset represents the production of 1 kg of liquid ozone. Ozone is an irritating and pale blue gas, very toxic and explosive. It is a very strong and powerful oxidizing agent and is always produced on a demand basis at its point of use. Ozone is primarily used for the treatment of drinking water and wastewater.
This dataset is based on a rough estimation of the consumption of main raw materials and energy, and should therefore be used only for processes where the impact of ozone is not considered to be high. The consumption of cooling water is based on data from a large chemical factory (Gendorf 2016).
References:
Hischier R. (2007) Life Cycle Inventories of Packagings & Graphical Papers. ecoinvent report No. 11, Swiss Centre for Life Cycle Inventories, Dübendorf, 2007.
Kirschner, M. J. 2000. Ozone. Ullmann's Encyclopedia of Industrial Chemistry.
Gendorf (2016) Umwelterklärung 2015, Werk Gendorf Industriepark, www.gendorf.de.

## Included activities start
The activity starts when the raw materials enter the process.

## Included activities end
This activity ends with the production of liquid ozone. The dataset includes the energy consumption, and an estimation of the cooling water and infrastructure. Not included is the input of 38.2 kg air (representing 8 kg of oxygen) and the output of the remaining parts of this input (such as nitrogen, carbon dioxide, oxygen, etc.).

## Geography
Data used for energy are from the EU-IPPC report and represent the average European situation. The data are assumed to be representative of the global production.
References:
European Commission (2001) Integrated Pollution Prevention and Control (IPPC) - Reference Document on Best Available Techniques in the Pulp and Paper Industry. Institute for Prospective Technological Studies, Sevilla. Some values are based on data from a large chemical factory located in Germany. These are assumed to be valid for this geography.

## Technology
Production of ozone from air in a corona discharge system.
References:
Hischier R. (2007) Life Cycle Inventories of Packagings & Graphical Papers. ecoinvent report No. 11, Swiss Centre for Life Cycle Inventories, Dübendorf, 2007.

## Time period
The data in this dataset come from different years, but overall form the most realistic picture of the production. Some values are based on data published by the Gendorf factory that were collected between 2011 and 2015. The time period has been adjusted accordingly. For more details, see the comments of the exchanges.

## Reference product
- ozone, liquid: 1 kg; By-product classification allocatable product; CPC 342: Basic inorganic chemicals n.e.c.
  production volume 3.304 kg
  properties: carbon allocation 0 kg, carbon content 0, carbon content, fossil 0, carbon content, non-fossil 0, dry mass 1 kg, price 1.71122 EUR2005, water content 0, water in wet mass 0 kg, wet mass 1 kg

## Inputs from technosphere
- chemical factory, organics: 4e-10 unit; lognormal variance with pedigree 0.3098, pedigree (2,3,2,4,3)
- electricity, medium voltage: 1.42947, 0.053484, 0.679532, 11.7941, 0.990323, 0.0530807 kWh (6 suppliers, which the file names only by identifier); sum of these 15 kWh; lognormal variance with pedigree 0.0146, pedigree (2,4,2,5,1)

## Inputs from nature
- Water, cooling, unspecified natural origin [natural resource, in water]: 0.0164 m3; lognormal variance with pedigree 0.0104, pedigree (2,3,2,4,3)

## Emissions to nature
- Ozone [air, urban air close to ground]: 0.002 kg; lognormal variance with pedigree 0.25, pedigree (5,5,5,5,5)
- Water [air, unspecified]: 0.00126851 m3; lognormal variance with pedigree 0.0104, pedigree (2,3,2,4,3)
- Water [water, unspecified]: 0.0151315 m3; lognormal variance with pedigree 0.0104, pedigree (2,3,2,4,3)

## Sampling procedure
Data based on literature and estimations. Some values are calculated based on data from a large chemical factory located in Germany. For more details, see the comments of the exchanges.

## Extrapolations
Electricity consumption represents the upper limit reported in EU-IPPC report. This dataset has been copied from an original dataset covering the geography RER. The uncertainty has been adjusted accordingly.

References:
European Commission (2001) Integrated Pollution Prevention and Control (IPPC) - Reference Document on Best Available Techniques in the Pulp and Paper Industry. Institute for Prospective Technological Studies, Sevilla.

## Review by Emilia Moreno Ruiz 2017-08-09
This dataset was additionally reviewed in a separate review process by Eric Johnson of Atlantic Consulting as well as Emilia Moreno Ruiz and Gregor Wernet of ecoinvent.
