# heat and power co-generation, wood chips, 6667 kW, state-of-the-art 2014

Dataset: EcoSpold 2, unit process
Geography: RU
Time period: 2010-01-01 to 2022-12-31
Technology level: modern
Classification: ISIC rev.4 ecoinvent: 3530:Steam and air conditioning supply
Tags: marginal; with true value; consequential version only; wood power
Scenario: Business-as-Usual
System model: Substitution, consequential, long-term
Generated by: Christian Bauer
Published in: Bauer, C. 2007
Database: ecoinvent
isCopyrightProtected: true
accessRestrictedTo: 1

## General comment
This technology currently does not contribute to power generation in this country. However, it is supposed to contribute to expansion/replacement of power generation capacity between today and 2030; therefore, electricity is the reference product. This dataset represents the production of heat and electricity with wood chips in a state-of-the-art (as of 2014) co-generation plant with a capacity of 6667 kW (referring to fuel input) in Switzerland and was used as approximation for this dataset valid for a global average (uncertainties adjusted accordingly). The technology corresponds to a modern unit to be installed in 2014 in Switzerland, which is equipped with an electrostatic precipitator for particulate matter (PM) emission reduction and an SNCR device for reduction of NOx emissions. Electricity is produced with an organic rankine cycle (ORC) steam generator.
Wood chips are burned in a boiler at a temperature of 800-1300 °C under excess air conditions and turned into carbon dioxide and water. Energy is set free in form of heat. Burning takes place with the following steps:
1. Drying
2. degradation of the wood into carbon and gases
3. degradation of the carbon into gases
4. oxidation of the gases
These phases overlap. The produced heat can be used directly or for steam production in order to generate electricity with a turbine.
Emissions vary with quality of the combustion (temperatur, mixing of the combustion gases and the added fresh air, retention time of gases in the combustor), filter technologies and with the efficiency of the plant. Emission data in this dataset are taken from measurements and literature as well as from communication with experts.
CO2 emissions were calculated out of the carbon content of the wood used as combustible. Carbon emitted in carbon monoxide was subtracted from the result.
Key emissions factors for CO, NOx, CH4, NMVOC and particles were updated according to latest data.
All other emission factors (per MJ fuel input) correspond to the 1000 kW boiler fuelled with wood chips from forest. Other exchanges correspond to the LCI data for the 6400 kW co-generation unit in ecoinvent v2.2.
Good J., Nussbaumer T., Bühler R., Jenni A. (1996) Erfolgskontrolle des SNCRVerfahren
zur Entstickung von Holzfeuerungen. Schlussbericht des BEWProjektes
53894. Zürich, Schweiz.

## Included activities start
From wood chips ready to be burned in cogeneration unit (for heat and power production).

## Included activities end
This activity ends with heat and electricity produced.

This dataset includes the infrastructure, the wood input, the emissions to air and the disposal of the ashes. Also included are substances needed for operation: lubricating oil, organic chemicals, sodium chloride, chlorine and decarbonized water.

## Geography
extrapolated from Swiss data

## Technology
Electric efficiency: 0.15; Thermal efficiency: 0.45;
Total efficiency: 0.6

## Time period
Current APV=0. However, this technology is supposed to contribute to capacity expansion/replacement between today and 2030.

## Parameters
- electrical efficiency: 0.15 dimensionless; name efficiency_electrical
  Electric efficiency of the cogeration system, corresponding to annual operation including warm-up and cool-down
  nan
- thermal efficiency: 0.45 dimensionless; name efficiency_thermal
  Thermal efficiency of the cogeration system, corresponding to annual operation including warm-up and cool-down
  nan

## Reference product
- heat, district or industrial, other than natural gas: 1 MJ; By-product classification allocatable product; CPC 17300: Steam and hot water
  production volume 1 MJ
  properties: carbon allocation 0 kg, carbon content 0, corresponding fuel use, propane, furnace >100kW 1.05263 MJ, exergy 0.169678 MJ, heating value, net 1 MJ, price 0.0106 EUR2005, true value relation 0.169678

## Inputs from technosphere
- NOx retained, by selective catalytic reduction: 0.000177778 kg
  properties: dry mass 1 kg, wet mass 1 kg
- ammonia, anhydrous, liquid: 3.03275e-9, 1.51895e-8 kg (2 suppliers, which the file names only by identifier); sum of these 1.82222e-8 kg
  properties: dry mass 1 kg, wet mass 1 kg
- chemical, organic: 1.3e-5 kg
  properties: carbon content, fossil 0.628, dry mass 1 kg, heating value, net 19.03 MJ, wet mass 1 kg
- chlorine, liquid: 6.06348e-7, 1.22541e-7 kg (2 suppliers, which the file names only by identifier); sum of these 7.28889e-7 kg
  properties: dry mass 1 kg, wet mass 1 kg
- dust collector, electrostatic precipitator, for industrial use: 1.15735e-9 unit
- electricity, high voltage: -0.0925926 kWh
  properties: exergy 3.6 MJ, price 0.0977 EUR2005
- furnace, wood chips, with silo, 5000kW: 1.15735e-9 unit
- heat and power co-generation unit, organic Rankine cycle, 1000kW electrical: 1.15735e-9 unit
- lubricating oil: 6.02062e-6, 1.26827e-6 kg (2 suppliers, which the file names only by identifier); sum of these 7.28889e-6 kg
  properties: carbon content, fossil 0.75, dry mass 1 kg, heating value, net 40.2 MJ, wet mass 1 kg
- municipal solid waste: -7.28889e-6 kg
  properties: carbon content, fossil 0.171549, carbon content, non-fossil 0.261655, dry mass 0.771 kg, heating value, net 11.74 MJ, water content 0.297017, wet mass 1 kg
- sodium chloride, powder: 9.11111e-6 kg
  properties: dry mass 1 kg, wet mass 1 kg
- waste mineral oil: -5.27446e-6, -2.01442e-6 kg (2 suppliers, which the file names only by identifier); sum of these -7.28889e-6 kg
  properties: carbon content, fossil 0.864444, dry mass 0.9 kg, heating value, net 34.7 MJ, water content 0.111111, wet mass 1 kg
- wastewater, average: -3.37494e-7, -1.4114e-6 m3 (2 suppliers, which the file names only by identifier); sum of these -1.74889e-6 m3
  properties: carbon content, non-fossil 0.194039, dry mass 0.346837 kg, water content 2882.2, wet mass 1000 kg
- water, decarbonised: 0.00174889 kg
  properties: wet mass 1 kg
- wood ash mixture, pure: -0.000794512, -0.000381043 kg (2 suppliers, which the file names only by identifier); sum of these -0.00117556 kg
  properties: carbon content, non-fossil 0.012, dry mass 1 kg, wet mass 1 kg
- wood chips, wet, measured as dry mass: 0.00235252, 0.115225 kg (2 suppliers, which the file names only by identifier); sum of these 0.117578 kg
  properties: carbon content, non-fossil 0.494, dry mass 1 kg, heating value, net 10.84 MJ, water content 1.1, wet mass 2.1 kg

## Emissions to nature
- Acetaldehyde [air, urban air close to ground]: 1.35556e-7 kg
- Ammonia [air, urban air close to ground]: 3.77778e-5 kg
- Arsenic ion [air, urban air close to ground]: 2.22222e-9 kg
- Benzene [air, urban air close to ground]: 2.02222e-6 kg
- Benzene, ethyl- [air, urban air close to ground]: 6.66667e-8 kg
- Benzene, hexachloro- [air, urban air close to ground]: 1.6e-14 kg
- Benzo(a)pyrene [air, urban air close to ground]: 1.11111e-9 kg
- Bromine [air, urban air close to ground]: 1.33333e-7 kg
- Cadmium II [air, urban air close to ground]: 1.55556e-9 kg
- Calcium [air, urban air close to ground]: 1.3e-5 kg
- Carbon dioxide, non-fossil [air, urban air close to ground]: 0.213333 kg
- Carbon monoxide, non-fossil [air, urban air close to ground]: 0.000222222 kg
- Chlorine [air, urban air close to ground]: 4e-7 kg
- Chromium III [air, urban air close to ground]: 8.8e-9 kg
- Chromium VI [air, urban air close to ground]: 8.88889e-11 kg
- Copper ion [air, urban air close to ground]: 4.88889e-8 kg
- Dinitrogen monoxide [air, urban air close to ground]: 5.11111e-6 kg
- Dioxins, measured as 2,3,7,8-tetrachlorodibenzo-p-dioxin [air, urban air close to ground]: 6.88889e-14 kg
- Fluorine [air, urban air close to ground]: 1.11111e-7 kg
- Formaldehyde [air, urban air close to ground]: 2.88889e-7 kg
- Hydrocarbons, aliphatic, alkanes, unspecified [air, urban air close to ground]: 2.02222e-6 kg
- Hydrocarbons, aliphatic, unsaturated [air, urban air close to ground]: 6.88889e-6 kg
- Lead II [air, urban air close to ground]: 5.55556e-8 kg
- Magnesium [air, urban air close to ground]: 8e-7 kg
- Manganese II [air, urban air close to ground]: 3.77778e-7 kg
- Mercury II [air, urban air close to ground]: 6.66667e-10 kg
- Methane, non-fossil [air, urban air close to ground]: 2.66667e-6 kg
- NMVOC, non-methane volatile organic compounds [air, urban air close to ground]: 6.22222e-6 kg
- Nickel II [air, urban air close to ground]: 1.33333e-8 kg
- Nitrogen oxides [air, urban air close to ground]: 0.000177778 kg
- PAH, polycyclic aromatic hydrocarbons [air, urban air close to ground]: 2.46667e-8 kg
- Particulate Matter, < 2.5 um [air, urban air close to ground]: 1.11111e-5 kg
- Phenol, pentachloro- [air, urban air close to ground]: 1.8e-11 kg
- Phosphorus [air, urban air close to ground]: 6.66667e-7 kg
- Potassium I [air, urban air close to ground]: 5.2e-5 kg
- Sodium [air, urban air close to ground]: 2.88889e-6 kg
- Sulfur dioxide [air, urban air close to ground]: 5.55556e-6 kg
- Toluene [air, urban air close to ground]: 6.66667e-7 kg
- Water [air, non-urban air or from high stacks]: 0.000129333 m3
- Zinc II [air, urban air close to ground]: 6.66667e-7 kg
- m-Xylene [air, urban air close to ground]: 2.66667e-7 kg

## Sampling procedure
literature, expert judgement, extrapolation

## Extrapolations
This dataset has been copied from a dataset valid for Switzerland (CH) without adjustment of any emission data. Uncertainty has been adjusted accordingly.
