# heat and power co-generation, natural gas, 500kW electrical, lean burn

Dataset: EcoSpold 2, unit process
Geography: RoW
Time period: 2000-01-01 to 2022-12-31
Technology level: current
Classification: EcoSpold01Categories: natural gas/cogeneration
Classification: ISIC rev.4 ecoinvent: 3530:Steam and air conditioning supply
Tags: ConvertedDataset; with true value
Scenario: Business-as-Usual
System model: Substitution, consequential, long-term
Generated by: [System]
Published in: Heck, T. 2007
Database: ecoinvent
isCopyrightProtected: true
accessRestrictedTo: 1

## General comment
The multioutput-process 'natural gas, burned in cogen 500kWe lean burn, allocation exergy' delivers the coproducts 'heat, at cogen 500kWe lean burn, allocation exergy' and 'electricity, at cogen 500kWe lean burn, allocation exergy'. The exergy allocation is the allocation scheme suggested to be used within ecoinvent (e.g. in electricity mixes).
[This dataset was already contained in the ecoinvent database version 2. It was not individually updated during the transfer to ecoinvent version 3. Life Cycle Impact Assessment results may still have changed, as they are affected by changes in the supply chain, i.e. in other datasets. This dataset was generated following the ecoinvent quality guidelines for version 2. It may have been subject to central changes described in the ecoinvent version 3 change report (http://www.ecoinvent.org/database/ecoinvent-version-3/reports-of-changes/), and the results of the central updates were reviewed extensively. The changes added e.g. consistent water flows and other information throughout the database. The documentation of this dataset can be found in the ecoinvent reports of version 2, which are still available via the ecoinvent website. The change report linked above covers all central changes that were made during the conversion process.]

## Included activities end
The module includes fuel input, infrastructure, emissions to air, and substances needed for operation.

## Geography
Emissions and efficiencies adjusted to Swiss emission regulation (LRV, Luftreinhalteverordnung) valid in year 2000.

## Technology
Average technology available on market.

## Reference product
- heat, district or industrial, natural gas: 1 MJ; By-product classification allocatable product; CPC 17300: Steam and hot water
  production volume 2.3361e11 MJ
  properties: Corresponding fuel use 1.98059 MJ, carbon allocation 0 kg, carbon content 0, exergy 0.169678 MJ, heating value, net 1 MJ, price 0.0106 EUR2005, true value relation 0.169678

## Inputs from technosphere
- electricity, high voltage: -0.152959, -0.0034481, -0.0128846, -0.00876647, -0.00068922, -0.0186534, -0.0006891, -0.0193016 kWh (8 suppliers, which the file names only by identifier); sum of these -0.217391 kWh
  properties: exergy 3.6 MJ, price 0.0977 EUR2005
- heat and power co-generation unit, 500kW electrical, common components for heat+electricity: 4.34783e-9 unit; lognormal variance with pedigree 0.002, pedigree (1,1,5,5,1)
- heat and power co-generation unit, 500kW electrical, components for electricity only: 4.34783e-9 unit; lognormal variance with pedigree 0.002, pedigree (1,1,5,5,1)
- heat and power co-generation unit, 500kW electrical, components for heat only: 4.34783e-9 unit; lognormal variance with pedigree 0.002, pedigree (1,1,5,5,1)
- lubricating oil: 6.52174e-5 kg; lognormal variance with pedigree 0.012, pedigree (1,1,5,5,1)
  properties: carbon content, fossil 0.75, dry mass 1 kg, heating value, net 40.2 MJ, wet mass 1 kg
- natural gas, low pressure: 0.000709505, 0.000706235, 0.000590164, 0.00196667, 0.00115744, 0.00153181, 0.00128823, 0.000601608, 0.0301322, 0.000284456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 m3 (13 suppliers, which the file names only by identifier); sum of these 0.0557414 m3; lognormal variance with pedigree 0.002, pedigree (1,1,5,5,1)
  properties: carbon content, fossil 0.695187, dry mass 1 kg, heating value, gross 39 MJ, heating value, net 36 MJ, wet mass 1 kg
- waste mineral oil: -4.71933e-5, -1.80241e-5 kg (2 suppliers, which the file names only by identifier); sum of these -6.52174e-5 kg; lognormal variance with pedigree 0.122, pedigree (1,1,1,5,1)
  properties: carbon content, fossil 0.864444, dry mass 0.9 kg, heating value, net 34.7 MJ, water content 0.111111, wet mass 1 kg

## Emissions to nature
- Carbon dioxide, fossil [air, urban air close to ground]: 0.121739 kg; lognormal variance with pedigree 0.002, pedigree (1,1,5,5,1)
- Carbon monoxide, fossil [air, urban air close to ground]: 0.000347826 kg; lognormal variance with pedigree 0.032, pedigree (1,1,5,5,1)
- Dinitrogen monoxide [air, urban air close to ground]: 1.08696e-5 kg; lognormal variance with pedigree 0.302, pedigree (1,1,5,5,1)
- Methane, fossil [air, urban air close to ground]: 0.000173913 kg; lognormal variance with pedigree 0.482, pedigree (1,1,5,5,1)
- NMVOC, non-methane volatile organic compounds [air, urban air close to ground]: 2.17391e-5 kg; lognormal variance with pedigree 1.082, pedigree (1,1,5,5,1)
- Nitrogen oxides [air, urban air close to ground]: 0.000152174 kg; lognormal variance with pedigree 0.022, pedigree (1,1,5,5,1)
- Particulate Matter, < 2.5 um [air, urban air close to ground]: 3.26087e-7 kg; lognormal variance with pedigree 0.122, pedigree (1,1,5,5,1)
- Sulfur dioxide [air, urban air close to ground]: 1.19565e-6 kg; lognormal variance with pedigree 0.002, pedigree (1,1,5,5,1)

## Sampling procedure
Literature. Manufacturer information.

## Extrapolations
none This dataset has been copied from an original dataset covering the geography CH. The uncertainty has been adjusted accordingly.

## Review by Gerald Rebitzer (obsolete) 2003-07-03
passed

## Review by Emilia Moreno Ruiz 2012-04-16
calculation of fuel use property.

## Review by Emilia Moreno Ruiz 2013-08-07
Production volumes were adjusted
