# planting with starter fertiliser, by no till planter

Dataset: EcoSpold 2, unit process
Geography: RoW
Time period: 2012-01-01 to 2022-12-31
Technology level: current
Classification: ISIC rev.4 ecoinvent: 0161:Support activities for crop production
Classification: EcoSpold01Categories: agricultural means of production/work processes
Synonyms: single-seeding; precision sowing
Scenario: Business-as-Usual
System model: Substitution, consequential, long-term
Generated by: Leticia De Santi Barrantes
Published in: Folegatti Matsuura M. 2017
Database: ecoinvent
isCopyrightProtected: true
accessRestrictedTo: 1

## General comment
This dataset represents the operation of precision seeding. Seed is not included. The dataset covers the application of seeds and starter fertiliser in the field with a tractor of 250 hp and 10771 kg coupled to an implement that weighs 16000 kg. The functional unit (FU) is one ha seeded. The operation time is 0.21 h/FU and fuel consumption around 18 liters per hour.
40 m² are occupied inside the shed. The implement can be used to fertilising besides seeding. In this case, both activities are made in the same operation.
Bibliography is listed below and also the ilustration of the equipment.
Nemecek & Kagi (2007) Life Cycle Inventories of Swiss and European Agricultural Production Systems. Final report ecoinvent v2.0 nº 15a. Agroscope Reckenholz - Taenikon Research Station ART, Swiss Center for Life Cycle Inventories, Zurich and Dubendorf, CH, retrieved from: www.ecoinvent.ch.
MATSUURA, M. I. S. F; PICOLI, J. F.; NOVAES, R. M. L.; DIAS, F. R. T.; HIRAKURI, M. H.; CASTRO, C.; ZORTEA, R. B. Workbook for life cycle inventories of agricultural products. Jaguariúna. Empresa Brasileira de Pesquisa Agropecuária, 2017.

## Included activities start
From agricultural field foreseen to be processed.

## Included activities end
The inventory takes into account the diesel fuel consumption and the amount of agricultural machinery and of the shed, which has to be attributed to the seeding operation. Also taken into consideration is the amount of emissions to the air from combustion and the emissions to soil from tyre abrasion during the work process. Seeds and fertilisers are not taken into account. Not included are dust other than from combustion. This activity ends with the transfer back to the shed and uncoupling of the implement from the tractor.

## Geography
The inventory is extrapolated from agricultural processes in Brazil.

## Technology
Current technology about seeding operation during agricultural processes. Fertilising can also be performed in the same operation.

## Time period
Time period of the most of the data collected for this dataset.

## Parameters
- annual employment tractor: 150 hour/year; name AET
  Tractor annual employment of a typical system from May et al. (2016) related to maize grain production in cropping system (during 4 months per year). In this case, sowing operation lasts 15 days with 10 hours of work.
- life time implement: 1500 hour; name LTI
  Life time of sowing implement according to the typical system from May et al. (2016).
- life time shed: 30 year; name LTS
  Amount for typical system from May et al. (2016).
- life time tractor: 6000 hour; name LTT
  Life time of sowing tractor according to the typical system from May et al. (2016).
- occupation_shed: 40 m2; name OS
  40 m² are occupied by the sowing equipment inside the shed according to the typical system from May et al. (2016).
- operation_time: 0.21276 hour/ha; name time
  Operation time of a typical system from May et al. (2016):
  The tractor sows the field with the efficiency of 4.7 hectare hour-1.
- weight of the implement: 10771 kg; name WI
  Weight of the implement applied. Amount for typical system from May et al. (2016).
- weight of the tractor: 16000 kg; name WT
  Weight of the tractor applied. Amount for typical system from May et al. (2016).

## Reference product
- planting with starter fertiliser, by no till planter: 1 ha; By-product classification allocatable product; CPC 86119: Other support services to crop production
  production volume 1.36006e9 ha
  properties: carbon allocation 0 kg, carbon content 0, price 5.80832 EUR2005

## Inputs from technosphere
- agricultural machinery, unspecified: 2.26944 kg; lognormal variance with pedigree 0.3007, pedigree (2,2,3,5,1)
- diesel: 0.0173891, 0.518748, 2.45137, 0.00591337, 0.0251339, 0.248253 kg (6 suppliers, which the file names only by identifier); sum of these 3.26681 kg; lognormal variance with pedigree 0.001325, pedigree (2,2,3,5,1)
  properties: carbon content, fossil 0.865, dry mass 1 kg, heating value, net 42.8 MJ, wet mass 1 kg
- shed: 0.0018912 m2; lognormal variance with pedigree 0.3007, pedigree (2,2,3,5,1)
- tractor, 4-wheel, agricultural: 0.38194 kg; lognormal variance with pedigree 0.3007, pedigree (2,2,3,5,1)

## Emissions to nature
- Ammonia [air, non-urban air or from high stacks]: 6.53362e-5 kg; lognormal variance with pedigree 0.0861, pedigree (3,2,5,5,4)
- Benzene [air, non-urban air or from high stacks]: 2.38477e-5 kg; lognormal variance with pedigree 0.0861, pedigree (3,2,5,5,4)
- Benzo(a)pyrene [air, non-urban air or from high stacks]: 9.80043e-8 kg; lognormal variance with pedigree 0.0861, pedigree (3,2,5,5,4)
- Cadmium II [air, non-urban air or from high stacks]: 3.26681e-8 kg; lognormal variance with pedigree 0.6961, pedigree (3,2,5,5,4)
- Carbon dioxide, fossil [air, non-urban air or from high stacks]: 10.1924 kg; lognormal variance with pedigree 0.0467, pedigree (3,2,5,5,4)
- Carbon monoxide, fossil [air, non-urban air or from high stacks]: 0.0020425 kg; lognormal variance with pedigree 0.6961, pedigree (3,2,5,5,4)
- Chromium III [air, non-urban air or from high stacks]: 1.6334e-7 kg; lognormal variance with pedigree 0.6961, pedigree (3,2,5,5,4)
- Copper ion [air, non-urban air or from high stacks]: 5.55357e-6 kg; lognormal variance with pedigree 0.6961, pedigree (3,2,5,5,4)
- Dinitrogen monoxide [air, non-urban air or from high stacks]: 0.000392017 kg; lognormal variance with pedigree 0.0861, pedigree (3,2,5,5,4)
- Methane, fossil [air, non-urban air or from high stacks]: 0.000421418 kg; lognormal variance with pedigree 0.0861, pedigree (3,2,5,5,4)
- NMVOC, non-methane volatile organic compounds [air, non-urban air or from high stacks]: 0.00095742 kg; lognormal variance with pedigree 0.0861, pedigree (3,2,5,5,4)
- Nickel II [air, non-urban air or from high stacks]: 2.28677e-7 kg; lognormal variance with pedigree 0.6961, pedigree (3,2,5,5,4)
- Nitrogen oxides [air, non-urban air or from high stacks]: 0.0108508 kg; lognormal variance with pedigree 0.0861, pedigree (3,2,5,5,4)
- PAH, polycyclic aromatic hydrocarbons [air, non-urban air or from high stacks]: 1.07e-5 kg; lognormal variance with pedigree 0.3461, pedigree (3,2,5,5,4)
- Particulate Matter, < 2.5 um [air, non-urban air or from high stacks]: 0.024 kg; lognormal variance with pedigree 0.3461, pedigree (3,2,5,5,4)
- Selenium IV [air, non-urban air or from high stacks]: 3.26681e-8 kg; lognormal variance with pedigree 0.6961, pedigree (3,2,5,5,4)
- Sulfur dioxide [air, non-urban air or from high stacks]: 0.00329948 kg; lognormal variance with pedigree 0.0467, pedigree (3,2,5,5,4)
- Zinc II [air, non-urban air or from high stacks]: 3.26681e-6 kg; lognormal variance with pedigree 0.6961, pedigree (3,2,5,5,4)
- Cadmium II [soil, agricultural]: 8.46989e-6 kg; lognormal variance with pedigree 0.0861, pedigree (3,2,5,5,4)
- Lead II [soil, agricultural]: 3.67029e-5 kg; lognormal variance with pedigree 0.0861, pedigree (3,2,5,5,4)
- Zinc II [soil, agricultural]: 0.000225864 kg; lognormal variance with pedigree 0.0861, pedigree (3,2,5,5,4)

## Extrapolations
Extrapolated from Brazilian data, uncertainty adjusted accordingly.
