# operation, dried roughage store, air dried, solar

Dataset: EcoSpold 2, unit process
Geography: CH
Time period: 1994-01-01 to 2022-12-31
Technology level: current
Classification: ISIC rev.4 ecoinvent: 0163:Post-harvest crop activities
Classification: EcoSpold01Categories: agricultural means of production/buildings
Tags: Operation; ConvertedDataset
Scenario: Business-as-Usual
System model: Substitution, consequential, long-term
Generated by: Dunja Dux
Published in: Nemecek, T. 2007
Database: ecoinvent
isCopyrightProtected: true
accessRestrictedTo: 1

## General comment
This dataset represents the operation of a dried roughage store. The module includes the use of energy and auxiliary materials for the operation of lighting, impeller blower and ventilator. The functional unit is kg DM hay (DM: dry matter).
[This dataset was already contained in the ecoinvent database version 2. It was not individually updated during the transfer to ecoinvent version 3. Life Cycle Impact Assessment results may still have changed, as they are affected by changes in the supply chain, i.e. in other datasets. This dataset was generated following the ecoinvent quality guidelines for version 2. It may have been subject to central changes described in the ecoinvent version 3 change report (http://www.ecoinvent.org/database/ecoinvent-version-3/reports-of-changes/), and the results of the central updates were reviewed extensively. The changes added e.g. consistent water flows and other information throughout the database. The documentation of this dataset can be found in the ecoinvent reports of version 2, which are still available via the ecoinvent website. The change report linked above covers all central changes that were made during the conversion process.]

## Included activities start
Operation of the housing system, starting from the various energy carriers and auxiliary materials used.

## Included activities end
This activity ends with the service of operation of an agricultural building. The dataset includes the energy and auxiliary materials like water, lubricating oil and cleaning agents. It also takes into account the use of the infrastructure. The dataset doesn't include direct emissions of animal husbandry, fodder production and produced waste water.

## Geography
The inventory applies for Swiss agricultural buildings only, because of the solid method of construction.

## Technology
Based on selected examples of this type of housing and buildings commonly found in Switzerland in the year 2000; but not conform to an “average Swiss building style”.

## Time period
Period indicated in the reference.

## Reference product
- operation, dried roughage store, air dried, solar: 1 kg; By-product classification allocatable product; CPC 86111: Post-harvest crop services
  production volume 7.84321e9 kg
  properties: carbon allocation 0 kg, carbon content 0, price 0.0236975 EUR2005

## Inputs from technosphere
- dried roughage store, air dried, solar: 0.000253 m3; lognormal variance with pedigree 0.3007, pedigree (2,2,5,1,1)
- electricity, low voltage: 0.0891 kWh; lognormal variance with pedigree 0.0007, pedigree (2,2,5,1,1)

## Inputs from nature
- Energy, solar, converted [natural resource, in air]: 16 MJ; lognormal variance with pedigree 0.00114442, pedigree (2,2,5,1,1)

## Sampling procedure
In the use of energy and auxiliary materials are big differences between the farms. The inventory is based on mean values from CH and WEU.

## Review by Roland Hischier 2003-08-06
Passed.

## Review by Roland Hischier 2011-12-01
Transfer of documentation done.
