# sodium phenolate production

Dataset: EcoSpold 2, unit process
Geography: RoW
Time period: 2010-01-01 to 2022-12-31
Technology level: current
Classification: ISIC rev.4 ecoinvent: 2011:Manufacture of basic chemicals
Synonyms: C6H5ONa
Scenario: Business-as-Usual
System model: Substitution, consequential, long-term
Share of production covered: 100 %
Generated by: Jürgen Sutter
Database: ecoinvent
isCopyrightProtected: true
accessRestrictedTo: 1

## General comment
The process “sodium phenolate, at plant, GLO" is modelled for the production of sodium phenolate from phenol. Raw materials are modelled with a stoechiometric calculation. Emissions are estimated. Energy consumptions, infrastructure and transports are calculated with standard values.
Sodium phenolate (C6H5ONa, CAS-No. 7601-89-0) is a white crystalline solid. It is hygroscopic and soluble in water and in alcohol. It usually comes as a monohydrate, which has a rhombic crystal structure.
Sodium phenolate can be produced by a reaction of phenol and sodium hydroxide.
C6H6O + NaOH → C6H5ONa + H2O
Sodium phenolate is used in the manufacture of antiseptics and as starting material for making salicylic acid.
Frischknecht R., Jungbluth N., Althaus H.-J., Doka G., Dones R., Heck T., Hellweg S., Hischier R., Nemecek T., Rebitzer G. and Spielmann M. (2007) Overview and Methodology. Final report ecoinvent v2.0 No. 1. Swiss Centre for Life Cycle Inventories, Dübendorf, CH, retrieved from: www.ecoinvent.org.
Gendorf (2000) Umwelterklärung 2000, Werk Gendorf. Werk Gendorf, Burgkirchen as pdf-File under: http://www.gendorf.de/pdf/umwelterklaerung2000.pdf
Manfred Weber, Markus Weber, Michael Kleine-Boymann: Phenol. Published online: 2004. In: Ullmann's Encyclopedia of Industrial Chemistry, Seventh Edition, 2004 Electronic Release (ed. Fiedler E., Grossmann G., Kersebohm D., Weiss G. and Witte C.). 7 th Electronic Release Edition. Wiley InterScience, New York, Online-Version under: DOI: 10.1002/14356007.a19_299.pub2

## Included activities end
production of sodium phenolate including materials, energy uses, infrastructure, and emissions

## Geography
The inventory is modelled for the world.

## Technology
reaction of phenol with sodium hydroxide

## Time period
Time of publications

## Parameters
- fraction, cooling water, cooling pond system, to air: 0.032 dimensionless; name fraction_CW_CP_to_air; lognormal variance with pedigree 0.0413, pedigree (2,3,1,3,1)
  Calculated based on literature value (Scown, C.D., 2011, Water Footprint of U.S. Transportation Fuels and supplying information of the article) (Vionnet, S., Quantis Water Database - Technical Report, 2012).
- fraction, cooling water, once-through system, to air: 0.004 dimensionless; name fraction_CW_OT_to_air; lognormal variance with pedigree 0.0413, pedigree (2,3,1,3,1)
  (same comment as for fraction, cooling water, cooling pond system, to air)
- fraction, cooling water, recirculating system, to air: 0.771 dimensionless; name fraction_CW_R_to_air; lognormal variance with pedigree 0.0413, pedigree (2,3,1,3,1)
  (same comment as for fraction, cooling water, cooling pond system, to air)
- fraction, cooling water, to air: 0.3875 dimensionless; name fraction_CW_to_air; = (0.5*fraction_CW_OT_to_air)+(0.5*fraction_CW_R_to_air); lognormal variance with pedigree 0.092025, pedigree (4,4,3,2,4)
  Calculated value based on literature value (see comments of the other parametres present in this dataset) and expert opinion. In the case when no industry/literature data are available about the type of cooling or directly fraction, cooling water, to air specific for the process a default assumption is applied. It is assumed that the once-through cooling system is used in 50% of all cases and recirculating system is used in another 50% of all cases.

## Reference product
- sodium phenolate: 1 kg; By-product classification allocatable product; CPC 341: Basic organic chemicals
  production volume 6.7e6 kg
  properties: carbon allocation 0.620751 kg, carbon content 0.620751, carbon content, fossil 0.620751, carbon content, non-fossil 0, dry mass 1 kg, heating value, net 24.03 MJ, price 1.11158 EUR2005, water content 0, water in wet mass 0 kg, wet mass 1 kg

## Inputs from technosphere
- chemical factory, organics: 4e-10 unit; lognormal variance with pedigree 0.3184, pedigree (4,5,5,5,5)
- electricity, medium voltage: 0.0317343, 0.00118734, 0.0150856, 0.261829, 0.0219852, 0.00117839 kWh (6 suppliers, which the file names only by identifier); sum of these 0.333 kWh; lognormal variance with pedigree 0.1786, pedigree (4,5,5,5,5)
- heat, from steam, in chemical industry: 2 MJ; lognormal variance with pedigree 0.1786, pedigree (4,5,5,5,5)
  properties: heating value, net 1 MJ
- hydrochloric acid, without water, in 30% solution state: 0.016334 kg; lognormal variance with pedigree 0.0255, pedigree (4,5,4,1,1)
  properties: dry mass 1 kg, heating value, net 3.32 MJ, wet mass 1 kg
- phenol: 0.85299 kg; lognormal variance with pedigree 0.0255, pedigree (4,5,4,1,1)
  properties: carbon content, fossil 0.765957, dry mass 1 kg, heating value, net 30.93 MJ, wet mass 1 kg
- sodium hydroxide, without water, in 50% solution state: 0.36298 kg; lognormal variance with pedigree 0.0255, pedigree (4,5,4,1,1)
  properties: dry mass 1 kg, heating value, net 3.03 MJ, wet mass 1 kg

## Inputs from nature
- Water, cooling, unspecified natural origin [natural resource, in water]: 0.024 m3; lognormal variance with pedigree 0.0255, pedigree (4,5,4,1,1)

## Emissions to nature
- Carbon dioxide, fossil [air, urban air close to ground]: 0.10349 kg; lognormal variance with pedigree 0.1786, pedigree (4,5,5,5,5)
- Phenol [air, urban air close to ground]: 0.001706 kg; lognormal variance with pedigree 0.1786, pedigree (4,5,5,5,5)
- Water [air, unspecified]: 0.0093 m3; lognormal variance with pedigree 0.092025, pedigree (4,4,5,2,4)
- BOD5, Biological Oxygen Demand [water, surface water]: 0.0093547 kg; lognormal variance with pedigree 0.218, pedigree (4,5,5,5,5)
- COD, Chemical Oxygen Demand [water, surface water]: 0.0093547 kg; lognormal variance with pedigree 0.218, pedigree (4,5,5,5,5)
- Chloride [water, surface water]: 0.01588 kg; lognormal variance with pedigree 0.3184, pedigree (4,5,5,5,5)
- DOC, Dissolved Organic Carbon [water, surface water]: 0.0031352 kg; lognormal variance with pedigree 0.218, pedigree (4,5,5,5,5)
- Phenol [water, surface water]: 0.0040944 kg; lognormal variance with pedigree 0.3184, pedigree (4,5,5,5,5)
- Sodium I [water, surface water]: 0.010436 kg; lognormal variance with pedigree 0.6642, pedigree (4,5,5,5,5)
- TOC, Total Organic Carbon [water, surface water]: 0.0031352 kg; lognormal variance with pedigree 0.218, pedigree (4,5,5,5,5)
- Water [water, unspecified]: 0.0147 m3; lognormal variance with pedigree 0.092025, pedigree (4,4,5,2,4)

## Sampling procedure
Literature data

## Extrapolations
Emissions are modelled with standard methods.
