# treatment of waste reinforced concrete, recycling

Dataset: EcoSpold 2, unit process
Geography: Europe without Switzerland
Time period: 1994-01-01 to 2022-12-31
Technology level: current
Classification: EcoSpold01Categories: waste management/recycling
Classification: ISIC rev.4 ecoinvent: 3830:Materials recovery
Tags: Treatment
Scenario: Business-as-Usual
System model: Substitution, consequential, long-term
Generated by: [System]
Database: ecoinvent
isCopyrightProtected: true
accessRestrictedTo: 1

## General comment
The waste contains 0.97kg inert material (GSD=100.1%) and 0.03kg steel (GSD=107.9%). Waste density is 2300 kg/m3.

## Included activities end
energy for dismantling, particulate matter emissions from dismantling and handling,

## Technology
Building demolition with skid-steer loaders.

## Reference product
- waste reinforced concrete: -1 kg; By-product classification Waste; CPC 39: Wastes or scraps
  production volume 1.65625e10 kg
  properties: carbon allocation 0 kg, carbon content 0, carbon content, fossil 0, carbon content, non-fossil 0, dry mass 0.99418 kg, price 0 EUR2005, water content 0.00585407, water in wet mass 0.00582 kg, wet mass 1 kg

## Inputs from technosphere
- diesel, burned in building machine: 0.0612 MJ; lognormal variance with pedigree 0.072, pedigree (1,1,5,5,1)
  properties: heating value, net 1 MJ

## Emissions to nature
- Particulate Matter, < 2.5 um [air, urban air close to ground]: 1.66e-5 kg; lognormal variance with pedigree 0.3252, pedigree (2,3,5,5,1)
- Particulate Matter, > 10 um [air, urban air close to ground]: 8.35e-5 kg; lognormal variance with pedigree 0.0552, pedigree (2,3,5,5,1)
- Particulate Matter, > 2.5 um and < 10um [air, urban air close to ground]: 6.34e-5 kg; lognormal variance with pedigree 0.1452, pedigree (2,3,5,5,1)

## Sampling procedure
waste-specific calculation based on literature data

## Extrapolations
none This dataset has been copied from an original dataset covering the geography CH. The uncertainty has been adjusted accordingly.

## Review by Niels Jungbluth 2003-05-22
Passed.
