# road vehicle factory construction

Dataset: EcoSpold 2, unit process
Geography: RoW
Time period: 1990-01-01 to 2022-12-31
Technology level: current
Classification: ISIC rev.4 ecoinvent: 4100:Construction of buildings
Classification: EcoSpold01Categories: transport systems/road
Tags: ConvertedDataset
Scenario: Business-as-Usual
System model: Substitution, consequential, long-term
Generated by: Michael Spielmann (obsolete)
Published in: Spielmann M. 2007
Database: ecoinvent
isCopyrightProtected: true
accessRestrictedTo: 1

## General comment
All data refer to one plant with an assumed life span of 50 years and a yearly output of 22918 vehicles. Further assumptions: 70% of the built up area is occupied with building halls and 30% are used for office buildings (multi storey buildings) with an assumed height between the floors of 2 .7m and an average of 5 floors. The remaining sealed area is modelled as road and parking infrastructure.
[This dataset was already contained in the ecoinvent database version 2. It was not individually updated during the transfer to ecoinvent version 3. Life Cycle Impact Assessment results may still have changed, as they are affected by changes in the supply chain, i.e. in other datasets. This dataset was generated following the ecoinvent quality guidelines for version 2. It may have been subject to central changes described in the ecoinvent version 3 change report (http://www.ecoinvent.org/database/ecoinvent-version-3/reports-of-changes/), and the results of the central updates were reviewed extensively. The changes added e.g. consistent water flows and other information throughout the database. The documentation of this dataset can be found in the ecoinvent reports of version 2, which are still available via the ecoinvent website. The change report linked above covers all central changes that were made during the conversion process.]

## Included activities end
The inventory includes construction of buildings, roads and parking on the manufacturing site. Also, land occupation and transformation are accounted for. Furthermore, the disopsal of material and enregy expenditures due to disposal activities are included.

## Geography
Data for parking and road represent Swiss conditions. Buildings represent Swiss and German conditions. Land use represents a German plant.

## Technology
no technologies are specified

## Time period
Building data represents conditions of the 1990ties

## Reference product
- road vehicle factory: 1 unit; By-product classification allocatable product; CPC 53269: Other constructions for manufacturing
  production volume 2.67763 unit
  properties: carbon allocation 0 kg, carbon content 0, price 9.14659e7 EUR2005

## Inputs from technosphere
- building, hall: 240000 m2; lognormal variance with pedigree 0.3746, pedigree (4,4,5,5,2)
- building, multi-storey: 361000 m3; lognormal variance with pedigree 0.3746, pedigree (4,4,5,5,2)
- road, company, internal: 3.08e7 m2*year; lognormal variance with pedigree 0.3746, pedigree (4,4,5,5,2)

## Inputs from nature
- Occupation, industrial area [natural resource, land]: 5.167e7 m2*year; lognormal variance with pedigree 0.054, pedigree (1,4,5,5,1)
- Transformation, from unspecified [natural resource, land]: 1.03e6 m2; lognormal variance with pedigree 0.134, pedigree (1,4,5,5,1)
- Transformation, to industrial area [natural resource, land]: 1.032e6 m2; lognormal variance with pedigree 0.134, pedigree (1,4,5,5,1)

## Sampling procedure
Land use data represents two plants in the lorry production (inal ssembly and maufacturing of metal parts). The yearly production is about 22000 heavy duy vehicles. A 50 year life span of the infrastructure is assumed. Data fo buildings on site is based on own assumptions.

## Extrapolations
Data from one production site in Germany is used as an first estimate for Europe. This dataset has been copied from an original dataset covering the geography RER. The uncertainty has been adjusted accordingly.

## Review by Niels Jungbluth 2003-08-27
passed.
