# transport, passenger, bicycle

Dataset: EcoSpold 2, unit process
Geography: RoW
Time period: 2005-01-01 to 2022-12-31
Technology level: current
Classification: EcoSpold01Categories: transport systems/road
Classification: ISIC rev.4 ecoinvent: 4922:Other passenger land transport
Synonyms: Citybike
Scenario: Business-as-Usual
System model: Substitution, consequential, long-term
Generated by: Marianne Leuenberger
Published in: M. Leuenberger 2010
Database: ecoinvent
isCopyrightProtected: true
accessRestrictedTo: 1

## General comment
The data set reflects the transport of one person on one kilometer on an bicycle. Capacity utilisation: 1 person

## Included activities end
This data includes the operation and maintenance of a bicycle and the use of the road infrastructure.

## Geography
Data for transport in Switzerland

## Technology
Citybike with racks. Life expectancy: 15000km

## Reference product
- transport, passenger, bicycle: 1 person*km; By-product classification allocatable product; CPC 64119: Other land transportation services of passengers, n.e.c.
  production volume 3.96633 person*km
  properties: carbon allocation 0 kg, carbon content 0, price 0.00626044 EUR2005

## Inputs from technosphere
- bicycle: 6.6667e-5 unit; lognormal variance with pedigree 0.3026, pedigree (2,1,5,5,1)
- maintenance, bicycle: 6.6667e-5 unit; lognormal variance with pedigree 0.3026, pedigree (2,1,5,5,1)
- road: 4.9158e-5 m*year; lognormal variance with pedigree 0.3902, pedigree (4,1,5,5,4)

## Sampling procedure
Literature

## Extrapolations
Some data extrapolated from motorcycle use This dataset has been copied from an original dataset covering the geography CH. The uncertainty has been adjusted accordingly.

## Review by Christian Bauer 2010-02-07
29.01.2010
passed
C:\Dokumente und Einstellungen\Marianne\Eigene Dateien\Projekte\277_Mobitool\Ecoinvent\Review\Upload 1\[Ecospold_Transport_ebikes-v1.1.xls]X-Process

## Review by Carl Vadenbo 2012-06-28
In preparation for the release of ecoinvent v3.0, exchange for disposal of used bicycle was moved from the dataset 'transport, passenger, bicycle, GLO' to 'bicycle production, GLO' The amounts and the uncertainty information of the exchanges were reviewed and the dataset was accepted for inclusion into the ecoinvent database on 2012.07.04.
