# catalytic converter production, three-way, mini CHP plant

Dataset: EcoSpold 2, unit process
Geography: CH
Time period: 1997-01-01 to 2022-12-31
Technology level: current
Classification: ISIC rev.4 ecoinvent: 2930:Manufacture of parts and accessories for motor vehicles
Classification: EcoSpold01Categories: natural gas/cogeneration
Tags: ConvertedDataset
Scenario: Business-as-Usual
System model: Substitution, consequential, long-term
Generated by: Thomas Heck
Published in: Heck, T. 2007
Database: ecoinvent
isCopyrightProtected: true
accessRestrictedTo: 1

## General comment
[This dataset was already contained in the ecoinvent database version 2. It was not individually updated during the transfer to ecoinvent version 3. Life Cycle Impact Assessment results may still have changed, as they are affected by changes in the supply chain, i.e. in other datasets. This dataset was generated following the ecoinvent quality guidelines for version 2. It may have been subject to central changes described in the ecoinvent version 3 change report (http://www.ecoinvent.org/database/ecoinvent-version-3/reports-of-changes/), and the results of the central updates were reviewed extensively. The changes added e.g. consistent water flows and other information throughout the database. The documentation of this dataset can be found in the ecoinvent reports of version 2, which are still available via the ecoinvent website. The change report linked above covers all central changes that were made during the conversion process.]

## Included activities end
The module includes the most important materials used for production. It includes also the transport of these materials and the energy and water needed for production.

## Geography
Could be used for central European conditions.

## Technology
Specific manufacturer (Ecopower in Switzerland)

## Parameters
- fraction, process water, to air: 0.15 dimensionless; name fraction_PW_to_air; lognormal variance with pedigree 0.092025, pedigree (4,4,3,2,4)
  Literature value. In case when no industry/process specific data are available, default evaporation fraction value is used. This value is 15% and is based on literature (Statistics Canada, 2007 & Shaffer, K.H., 2008, Consumptive water use in the Great Lakes Basin, USGS & Shiklomanov, 2003, World Water Resources at the Beginning of the 21st Century) and has been approved by an expert.

## Reference product
- catalytic converter, three-way, mini CHP plant: 1 unit; By-product classification allocatable product; CPC 46910: Electrical ignition or starting equipment of a kind used for internal combustion engines; generators and cut-o[…]
  production volume 0.0336675 unit
  properties: carbon allocation 0 kg, carbon content 0, price 8.87806 EUR2005

## Inputs from technosphere
- electricity, medium voltage: 2.7 kWh; lognormal variance with pedigree 0.0847, pedigree (3,3,5,3,4)
- palladium: 0.00081 kg; lognormal variance with pedigree 0.148, pedigree (4,5,5,1,1)
  properties: dry mass 1 kg, wet mass 1 kg
- rhodium: 0.00016 kg; lognormal variance with pedigree 0.148, pedigree (4,5,5,1,1)
  properties: dry mass 1 kg, wet mass 1 kg
- steel, chromium steel 18/8, hot rolled: 0.47 kg; lognormal variance with pedigree 0.148, pedigree (4,5,5,1,1)
  properties: carbon content, fossil 0.0008, dry mass 1 kg, wet mass 1 kg
- wastewater from pig iron production: -0.000564 m3; lognormal variance with pedigree 0.3, pedigree (1,1,1,1,1)
  properties: carbon content, fossil 1.2149e-5, dry mass 0.337476 kg, water content 2962.17, wet mass 1000 kg
- zeolite, powder: 0.03 kg; lognormal variance with pedigree 0.148, pedigree (4,5,5,1,1)
  properties: dry mass 1 kg, wet mass 1 kg

## Inputs from nature
- Water, unspecified natural origin [natural resource, in water]: 0.000705 m3; lognormal variance with pedigree 0.3, pedigree (1,1,5,1,1)

## Emissions to nature
- Carbon dioxide, fossil [air, unspecified]: 0.0095 kg; lognormal variance with pedigree 0.098025, pedigree (3,5,5,2,3)
- Water [air, unspecified]: 0.00010575 m3; lognormal variance with pedigree 0.0407, pedigree (2,2,5,1,1)
- Water [water, unspecified]: 3.525e-5 m3; lognormal variance with pedigree 0.0407, pedigree (2,2,5,1,1)

## Sampling procedure
Operator and manufacturer information

## Review by Gerald Rebitzer (obsolete) 2003-08-27
had passed
