# electricity production, compressed air energy storage

Dataset: EcoSpold 2, unit process
Geography: RER
Time period: 1998-01-01 to 2022-12-31
Technology level: modern
Classification: EcoSpold01Categories: natural gas/power plants
Classification: ISIC rev.4 ecoinvent: 3510:Electric power generation, transmission and distribution
Scenario: Business-as-Usual
System model: Substitution, consequential, long-term
Generated by: Heidi Hottenroth
Published in: Bouman, Evert A. 2016
Database: ecoinvent
isCopyrightProtected: true
accessRestrictedTo: 1

## General comment
The dataset represents elecctricity production by compressed air energy storage.This energy storage system is based on using electricity to compress air and store it in underground caverns. The air is released when needed and passed through a turbine to generate electricity.
The compressed air energy storage (CAES) system makes use of a gas turbine for heating up the outflow of air from the storage location. This is different to the adiabatic CAES (also available in the database) which stores the heat in a thermal storage. The dataset refers mainly to Bouman, Evert A.; Øberg, Martha M.; Hertwich, Edgar G. (2016): Environmental impacts of balancing offshore wind power with compressed air energy storage (CAES). In: Energy 95, S. 91–98. DOI: 10.1016/j.energy.2015.11.041.
Bouman et al. do not provide detailed data on emissions of gas turbine. Therefore emissions are modelled according to the ecoinvent dataset of natural gas burned in a normal power plant (electricity production, natural gas, conventional power plant).
['text', 'In a combined cycle power plant, a gas turbine is followed by a steam turbine. The dataset refers to a combined cycle power plant of 400MWe class with a gas turbine 260MWe and a steam turbine 140MWe.']
['text', 'For electricity production with natural gas, four different datasets relying to different power plant types exist:']
['text', ' - conventional power plant with / without CHP']
['text', ' - combined cycle power plant with / without CHP']
['text', 'At the moment, these datasets differ in nothing but the efficiency. High voltage electricity (at the busbar) is the reference product, whereupon heat is a by-product in CHP plants. Out of all fossile fuels, natural gas holds worldwide the highest share of CHP plants besides peat. Furthermore, natural gas power plants are today often designed with combined cycles. The advantages of a combined cycle power plant are for example: ']
['text', ' - a higher efficiency (approximately between 50-60% compared to ca. 33% for a conventional power plant)']
['text', ' - high operating flexibility']
['text', ' - lower emissions due to higher efficiency']
['text', ' - lower cooling water need. ']
['text', 'The approximate share of combined cycle natural gas power plants in Germany amounts to ca. {{cc_share}}. {{chp}} combined heat power plants (calculations made with IEA/OECD statistics and own assumptions). ']
['text', 'The efficiency calculations are based on IEA/OECD statistics (fuel inputs, electricity produced) and some own calculation assumptions. . Reducing factors such as contaminations of important plant parts, cooling conditions or part load have been taken into account. Even if efficiencies vary with different surrounding temperatures, a medium efficiency is assumed for all countries. Temperature adjustments would be related to high uncertainties.']
['text', 'Water is used for wet cooling and as feed water in the steam circuit. In this dataset, 100% wet cooling and no once-through cooling is assumed. ']
['text', 'EMISSIONS:']
['text', 'Different sources served as basis for assumption of average emissions. Where possible, the most recent sources were taken into account, whereas older sources were taken in order to determine the remaining data gaps. The emissions have been fixed for the former UCTE region* and have been overtaken as such for all countries without value adaptation (adaptation of the uncertainty). See ecoinvent report 'Erdgas' given as main source for details (Tab. 11.15). In the following a short overview:']
['text', ' - Emissions of NOx, CO, CO2, SO2, particles, N2O and CH4 are mainly taken from CORINAIR 2001, EPA, and a variety of other data sources ']
['text', '-\tNOx emissions are a major challenge in natural gas power plants. With rising temperature, emissions also rise; band widths of NOx emissions in literature are correspondingly large. There are several methods to diminish these emissions.']
['text', '-\tCO is a result of uncomplete burning. For economic and technical reasons, plant combustion is optimized and CO emissions are low. ']
['text', '-\tCO2 and SO2 emissions are dependent on the composition of the used fuel. Due to the low sulfur content of the used natural gas, no desulfurization has to take place.']
['text', '-\tOrganic compound emissions are estimated on the basis of EPA 1998. ']
['text', '-\tParticles are assumed to be smaller than 2.5 micro-m']
['text', 'former UCTE: Union for the Coordination of the Transmission of Electricity, since 2009 replaced by ENTSO-E European Network of Transmission System Operators for Electricity.']
['text', 'Sources:']
['text', '-\tCORINAIR 2001. EMEP/CORINAIR 2001: Joint EMEP/CORINAIR Atmospheric Emission Inventory Guidebook, Third Edition. Copenhagen: European Environment Agency, 2001. http://reports.eea.eu.int/technical_report_2001_3/en.']
['text', '-\tEPA 1998. US Environmental Protection Agency (1998). Compilation of Air Pollutant Emission Factors, AP-42, Fifth Edition, Volume I: Chapter 1: External Combustion Sources, Natural Gas Combustion - Final Section - Supplement D , July 1998. CHIEF (Clearinghouse for Inventories and Emission Factors). Research Triangle Park, North Carolina. http://www.epa.gov/ttn/chief/ap42/.']
['text', '-\tRentz O., Karl U., Peter H. (2002). Ermittlung und Evaluierung von Emissionsfaktoren f\xfcr Feuerungsanlagen in Deutschland f\xfcr die Jahre 1995, 2000 und 2010. Deutsch- Franz\xf6sisches Institut f\xfcr Umweltforschung, Uni Karsruhe. Endbericht. Im Auftrag des Umweltbundesamtes. Forschungsbericht 299 43 142. Umweltbundesamt. Berlin.']

## Included activities start
From the constructed CAES plant ready to produce or store electricity. From reception of natural gas at power plant gate.

## Included activities end
This activity ends with 1kWh of high voltage electricity produced at the power plant and arrival at the busbar. The dataset includes electricity input, which is stored and natural gas input for turbine operation. Emissions of natural gas combustion are included.

## Geography
The scope of the underlying literature source is Europe.

## Technology
Power rating: 200 MW. Storage capacity: 19.2 MWh. Annual production: 1473 GWh

## Time period
refers to date of publicaton

## Parameters
- factor: input of MJ for the production of 1 kWh: 4.2 MJ/kWh; name factor_MJ_kWh; lognormal variance with pedigree 0.0532, pedigree (4,4,3,4,4)
  Literature value
- lifetime: 100 year

## Reference product
- electricity, high voltage: 1 kWh; By-product classification allocatable product; CPC 17100: Electrical energy
  production volume 1 kWh
  properties: carbon allocation 0 kg, carbon content 0, price 0.0977 EUR2005

## Inputs from technosphere
- compressed air energy storage plant, 200 MW electrical: 6.78887e-12 unit; lognormal variance with pedigree 0.3087, pedigree (2,5,3,3,1)
- electricity, high voltage: 0.67 kWh; lognormal variance with pedigree 0.0093, pedigree (2,5,3,3,1)
- natural gas, high pressure: 0.115837, 0.000829987 m3 (2 suppliers, which the file names only by identifier); sum of these 0.116667 m3; lognormal variance with pedigree 0.002, pedigree (1,1,3,5,1)
  properties: carbon content, fossil 0.602381, dry mass 0.84 kg, heating value, net 36 MJ, wet mass 0.84 kg

## Emissions to nature
- Acenaphthene [air, non-urban air or from high stacks]: 3.3306e-12 kg; lognormal variance with pedigree 0.6487, pedigree (3,3,5,3,3)
- Acetaldehyde [air, non-urban air or from high stacks]: 3.36e-9 kg; lognormal variance with pedigree 1.0747, pedigree (4,3,5,3,3)
- Acetic acid [air, non-urban air or from high stacks]: 5.082e-7 kg; lognormal variance with pedigree 1.0687, pedigree (3,3,5,3,3)
- Arsenic ion [air, non-urban air or from high stacks]: 1.7262e-10 kg; lognormal variance with pedigree 0.06, pedigree (3,5,5,5,4)
- Benzene [air, non-urban air or from high stacks]: 3.7884e-9 kg; lognormal variance with pedigree 0.6487, pedigree (3,3,5,3,3)
- Benzo(a)pyrene [air, non-urban air or from high stacks]: 2.2218e-12 kg; lognormal variance with pedigree 0.6487, pedigree (3,3,5,3,3)
- Beryllium II [air, non-urban air or from high stacks]: 1.0374e-11 kg; lognormal variance with pedigree 0.06, pedigree (3,5,5,5,4)
- Butane [air, non-urban air or from high stacks]: 3.8892e-6 kg; lognormal variance with pedigree 0.6487, pedigree (3,3,5,3,3)
- Cadmium II [air, non-urban air or from high stacks]: 9.492e-10 kg; lognormal variance with pedigree 0.06, pedigree (3,5,5,5,4)
- Carbon dioxide, fossil [air, non-urban air or from high stacks]: 0.22428 kg; lognormal variance with pedigree 0.0193, pedigree (3,3,5,3,3)
- Carbon monoxide, fossil [air, non-urban air or from high stacks]: 9.24e-6 kg; lognormal variance with pedigree 0.3032, pedigree (3,3,5,4,3)
- Chromium III [air, non-urban air or from high stacks]: 1.2054e-9 kg; lognormal variance with pedigree 0.028, pedigree (3,5,5,5,3)
- Cobalt II [air, non-urban air or from high stacks]: 7.224e-11 kg; lognormal variance with pedigree 0.06, pedigree (3,5,5,5,4)
- Dinitrogen monoxide [air, non-urban air or from high stacks]: 4.1034e-6 kg; lognormal variance with pedigree 0.3087, pedigree (3,3,5,3,3)
- Dioxins, measured as 2,3,7,8-tetrachlorodibenzo-p-dioxin [air, non-urban air or from high stacks]: 1.218e-16 kg; lognormal variance with pedigree 1.0747, pedigree (4,3,5,3,3)
- Ethane [air, non-urban air or from high stacks]: 5.754e-6 kg; lognormal variance with pedigree 0.6487, pedigree (3,3,5,3,3)
- Formaldehyde [air, non-urban air or from high stacks]: 1.3566e-7 kg; lognormal variance with pedigree 0.6487, pedigree (3,3,5,3,3)
- Hexane [air, non-urban air or from high stacks]: 3.3306e-6 kg; lognormal variance with pedigree 0.6487, pedigree (3,3,5,3,3)
- Lead II [air, non-urban air or from high stacks]: 4.326e-10 kg; lognormal variance with pedigree 0.06, pedigree (3,5,5,5,4)
- Manganese II [air, non-urban air or from high stacks]: 3.2802e-10 kg; lognormal variance with pedigree 0.06, pedigree (3,5,5,5,4)
- Mercury II [air, non-urban air or from high stacks]: 2.8896e-10 kg; lognormal variance with pedigree 0.6487, pedigree (3,3,5,3,3)
- Methane, fossil [air, non-urban air or from high stacks]: 4.0782e-6 kg; lognormal variance with pedigree 0.6487, pedigree (3,3,5,3,3)
- Nickel II [air, non-urban air or from high stacks]: 1.8102e-9 kg; lognormal variance with pedigree 0.06, pedigree (3,5,5,5,4)
- Nitrogen oxides [air, non-urban air or from high stacks]: 0.0001071 kg; lognormal variance with pedigree 0.3352, pedigree (3,3,5,4,4)
- PAH, polycyclic aromatic hydrocarbons [air, non-urban air or from high stacks]: 3.36e-8 kg; lognormal variance with pedigree 1.0747, pedigree (4,3,5,3,3)
- Particulate Matter, < 2.5 um [air, non-urban air or from high stacks]: 2.0622e-6 kg; lognormal variance with pedigree 0.3347, pedigree (3,3,5,3,4)
- Pentane [air, non-urban air or from high stacks]: 4.83e-6 kg; lognormal variance with pedigree 0.6487, pedigree (3,3,5,3,3)
- Propane [air, non-urban air or from high stacks]: 2.961e-6 kg; lognormal variance with pedigree 0.6487, pedigree (3,3,5,3,3)
- Propionic acid [air, non-urban air or from high stacks]: 6.72e-8 kg; lognormal variance with pedigree 1.0747, pedigree (4,3,5,3,3)
- Selenium IV [air, non-urban air or from high stacks]: 2.0622e-11 kg; lognormal variance with pedigree 0.6487, pedigree (3,3,5,3,3)
- Sulfur dioxide [air, non-urban air or from high stacks]: 2.4024e-6 kg; lognormal variance with pedigree 0.0197, pedigree (3,3,5,3,3)
- Toluene [air, non-urban air or from high stacks]: 6.3e-9 kg; lognormal variance with pedigree 0.6487, pedigree (3,3,5,3,3)

## Sampling procedure
Literature. Bouman et al. do not provide detailed data on emissions of gas turbine. Therefore emissions are modelled according to the ecoinvent dataset of natural gas burned in a normal power plant (electricity production, natural gas, conventional power plant, GLO 2015, allocation, cut-off).

## Review by Carl Vadenbo 2021-01-19
remaining issues (to be addessed internally by ecoinvent):
- firstly, the dataset 'electricity production, compressed air storage, RER, 2015' did not get an activity link for its infrastructure requirements.
- Secondly, and probably more importantly, the issue that Avraam spotted last time about PV=1 in both RER and GLO for the compressed air energy storage plants (hence preventing GLO from being created as RoW during linking) still persists.
