# calcium ammonium nitrate production

Dataset: EcoSpold 2, unit process
Geography: RoW
Time period: 2011-01-01 to 2022-12-31
Technology level: current
Classification: ISIC rev.4 ecoinvent: 2012:Manufacture of fertilizers and nitrogen compounds
Synonyms: CAN, Nitro-limestone, Nitrochalk
Scenario: Business-as-Usual
System model: Substitution, consequential, long-term
Generated by: Anna Kounina
Database: ecoinvent
isCopyrightProtected: true
accessRestrictedTo: 1

## General comment
This dataset is a weighted average from the respective regional datasets.
This dataset represents the production of 1 kg of calcium ammonium nitrate (CAN) with 27% N, from liquid ammonia, nitric acid and dolomite. Calcium ammonium nitrate is a fertiliser with 26-27 % N content produced through the neutralisation of aqueous nitric acid by gaseous ammonia. This exothermic process generates an ammonium nitrate solution and steam. The ammonium nitrate is then mixed with a filler that contains dolomite to produce calcium ammonium nitrate. The final product is either prilled or granulated. The process steps are neutralisation, evaporation and solidification.
The main data sources for this dataset are Fertilizers Europe (2014, 2016). Additional data sources are listed as follows.
References:
Fertilizers Europe (2000): Best Available Techniques for Pollution Prevention and Control in the European Fertilizer Industry. Booklet No. 1 of 8: Production of Ammonia. Fertilizers Europe, Brussels.
Kongshaug G. (1998): Energy Consumption and Greenhouse Gas Emissions in Fertilizer Production. IFA 20th July 1998
Davies J., Haglund C. (1999): Life Cycle Inventory of Fertiliser Production. SIK-Report No 654 1999. Chalmers University of Technology, Sweden.
Fertilizers Europe (2014): Average Emissions Year 2011. Fertilizers Europe Environmental report (internal).
Fertilizers Europe (2016): Carbon Footprint Calculator for Fertilizer Production. Specification. Version 2.1
Fertilizers Europe (2016): Average Emissions Year 2014. Fertilizers Europe Environmental report (internal). Used for updated energy and GHG emission in Carbon Footprint Calculator
Althaus H.-J., Chudacoff M., Hischier R., Jungbluth N., Osses M. and Primas A. (2007) Life Cycle Inventories of Chemicals. ecoinvent report No. 8, v2.0. EMPA Dübendorf, Swiss Centre for Life Cycle Inventories, Dübendorf, CH.

## Included activities start
The activity includes all the raw and processed materials necessary to produce this product. Liquid ammonia, nitric acid, dolomite, heat (as natural gas) and electricity are included. Direct emissions include ammonia and particulate matter to air and nitrogen to water.

## Included activities end
The activity ends with the final product being ready for transportation at the production site.

## Geography
This dataset is a weighted average built from the following geographies: RER, RNA, CN.

## Technology
Average techlogy from the regional counterparts as given in the geography comment.

## Time period
Primary data were collected on fertiliser production for the year 2011. These data were based on annual average data for the year 2011.

## Reference product
- calcium ammonium nitrate: 1 kg; By-product classification allocatable product; CPC 34614: Double salts and mixtures of calcium nitrate and ammonium nitrate
  production volume 6.87045e9 kg
  properties: calcium content 0.100139, carbon allocation 0 kg, carbon content 0, carbon content, fossil 0, carbon content, non-fossil 0, dry mass 1 kg, hydrogen content 0.03022, nitrogen content 0.27, oxygen content 0.599639, price 0.366624 EUR2005, water content 0, water in wet mass 0 kg, wet mass 1 kg

## Inputs from technosphere
- ammonia, anhydrous, liquid: 0.00127485, 0.00626588, 0.0121633, 0.134823, 0.00377397, 0.00569905 kg (6 suppliers, which the file names only by identifier); sum of these 0.164 kg; lognormal variance with pedigree 0.0086, pedigree (3,4,5,5,1)
  properties: dry mass 1 kg, hydrogen content 0.177547, nitrogen content 0.822453, wet mass 1 kg
- chemical factory, organics: 4.077e-10 unit; lognormal variance with pedigree 0.308, pedigree (3,4,5,5,1)
- dolomite: 0.229 kg; lognormal variance with pedigree 0.0086, pedigree (3,4,5,5,1)
  properties: carbon content, fossil 0.130267, dry mass 1 kg, heating value, net 3.95 MJ, magnesium content 0.131805, oxygen content 0.520586, wet mass 1 kg
- electricity, low voltage: 6.78145e-5, 0.00714175, 0.000164912, 0.00105371, 0.000122049, 0.00101669, 0.00585562, 0.00141952, 0.00387933, 0.000435362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 kWh (43 suppliers, which the file names only by identifier); sum of these 0.0775 kWh; lognormal variance with pedigree 0.0086, pedigree (3,4,5,5,1)
- heat, central or small-scale, natural gas: 0.4 MJ; lognormal variance with pedigree 0.0086, pedigree (3,4,5,5,1)
  properties: heating value, net 1 MJ
- nitric acid, without water, in 50% solution state: 0.157539, 0.0426356, 0.0631154, 0.0754846, 0.0633499, 0.204875 kg (6 suppliers, which the file names only by identifier); sum of these 0.607 kg; lognormal variance with pedigree 0.0086, pedigree (3,4,5,5,1)
  properties: dry mass 1 kg, hydrogen content 0.0159952, nitrogen content 0.222283, oxygen content 0.761721, wet mass 1 kg
- steam, in chemical industry: 0.245455 kg; lognormal variance with pedigree 0.0086, pedigree (3,4,5,5,1)
  properties: dry mass 1 kg, wet mass 1 kg

## Emissions to nature
- Ammonia [air, urban air close to ground]: 9e-5 kg; lognormal variance with pedigree 0.048, pedigree (3,4,5,5,1)
- Particulate Matter, > 2.5 um and < 10um [air, urban air close to ground]: 0.00014 kg; lognormal variance with pedigree 0.128, pedigree (3,4,5,5,1)
- Water [air, unspecified]: 0.000203 m3; lognormal variance with pedigree 0.048, pedigree (3,4,5,5,1)
- Ammonium [water, surface water]: 0.00026001 kg; lognormal variance with pedigree 0.048, pedigree (3,4,5,5,1)
- Nitrogen [water, surface water]: 5e-5 kg; lognormal variance with pedigree 0.048, pedigree (3,4,5,5,1)

## Extrapolations
This dataset was built as a weighted average of regional datasets of the same activityName. Weights are based on production volumes.
RER: production volume = 1.23e+10 kg/year, weight = 0.7488
RNA: production volume = 3.72e+09 kg/year, weight = 0.2275
CN: production volume = 3.89e+08 kg/year, weight = 0.02376
