# electricity production, hydro, pumped storage

Dataset: EcoSpold 2, unit process
Geography: RoW
Time period: 1945-01-01 to 2022-12-31
Technology level: modern
Classification: ISIC rev.4 ecoinvent: 3510:Electric power generation, transmission and distribution
Tags: hydro power
Scenario: Business-as-Usual
System model: Substitution, consequential, long-term
Generated by: Karin Treyer
Published in: Bolliger, R. 2007
Database: ecoinvent
isCopyrightProtected: true
accessRestrictedTo: 1

## General comment
This dataset represents the production of 1 kWh of electricity in a pumped storage power plant unit on the world in 2012. The calculation of this dataset is based on data of reservoir hydro power plant units. For this, a representative sample of various types of dams in Switzerland is taken into account, i.e. 52 reservoir power plants with an annual gross production output of 17.8 TWh and an installed capacity of 9130 MW. Reservoir power plants and pumped storage power plants are dealt with together due to the fact that the construction efforts are related. Lifetime is assumed to be 150 years for the dam and 80 years for the rest of materials. The data refers to plant operation of a mix of types of dams built between 1945 and 1970; therefore they might not be representative for more modern construction, for an individual type and for small-scale and smallest-scale plants.

## Included activities start
From water pumped up from a lower to an upper reservoir.

## Included activities end
The activity ends with 1 kWh of high voltage electricity produced at the power plant and arrived at the busbar.

The dataset includes the use of pump energy (electricity, high voltage), lubricant oil, the volume of the reservoir, the mass of water passing through the turbines and an estimation of greenhouse gas emissions out of the water reservoir.

The dataset doesn't include an analysis of net greenhouse gas emissions (due to a lack of respective information) and the hydrological and biological impacts are only rudimentary included via land use (occupation and transformation) data.

## Geography
Data represent the average of a characteristic sample of Swiss reservoir hydropower plants, valid for pumped storage hydro power plants.

## Technology
Definition of pumped storage in this dataset: The water is not being pumped for circulation reasons, but for increasing the inflow of a reservoir. Net production is the gross production minus about 1% losses. Additionally there is energy needed for pumping. The efficiency of a pumped storage hydropower plant is around 70% (p.14 in Bauer et al. 2007).

## Time period
The Annual Production Volume is valid for the year 2012.

## Parameters
- gross electricity production: 2.49827e11 kWh; name gross_electricity; lognormal variance with pedigree 0.0012, pedigree (2,1,1,1,1)
  Literature value/statistics. For all OECD countries, the OECD iLibrary 2014 provides data on electricity production with pumped storage hydropower plants (gross values 2012).
  For all non-OECD countries and the world, this value was not explicitely given in any statistics. However, the IEA electricity information 2014 provides data on total electricity production with hydropower, while the IEA Energy balances of non-OECD countries provides data on electricity production with hydropower excluding pumped storage.
  OECD. 2014. IEA Electricity Information Statistics: OECD - Electricity and heat generation. OECD iLibrary. Online database. DOI : 10.1787/elect-data-en
  IEA/OECD. 2014. Electricity Information 2014. Table 1.2. International Energy Agency (IEA), Paris Cedex (FR).
  IEA/OECD. 2014. Energy balances of non-OECD countries 2014. Part II. International Energy Agency (IEA), Paris Cedex (FR).
- lifetime: 150 year; lognormal variance with pedigree 0.0014, pedigree (2,2,1,3,1)
  Estimation based on experiences.
  nan
- losses from gross electricity production: 0.01 dimensionless; name losses_gross_net; lognormal variance with pedigree 0.003225, pedigree (3,3,1,2,1)
  Literature value. Generic value taken from the IEA Electricity information 2014, part I, p. I.7: 'The difference between gross and net electricity production is generally observed to be about 7% for conventional thermal stations, 1% for hydro stations and 6% for nuclear.'
  IEA/OECD. 2014. Electricity Information 2014. International Energy Agency (IEA), Paris Cedex (FR).
  nan

## Reference product
- electricity, high voltage: 1 kWh; By-product classification allocatable product; CPC 17100: Electrical energy
  production volume 1.55651e11 kWh
  properties: carbon allocation 0 kg, carbon content 0, price 0.0977 EUR2005

## Inputs from technosphere
- electricity, high voltage: 0.00872822, 0.00396587, 0.00150582, 0.000154744, 0.000772751, 0.00175049, 0.00237271, 0.000916102, 0.00580501, 0.0114616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 kWh (110 suppliers, which the file names only by identifier); sum of these 1.43 kWh; lognormal variance with pedigree 0.012, pedigree (1,1,5,5,3)
- hydropower plant, reservoir, alpine region: 2.10199e-13 unit; lognormal variance with pedigree 0.211, pedigree (5,5,5,5,5)
- hydropower plant, reservoir, non-alpine regions: 1.93841e-13 unit; lognormal variance with pedigree 0.211, pedigree (5,5,5,5,5)
- lubricating oil: 7.56e-6 kg; lognormal variance with pedigree 0.094, pedigree (1,1,5,5,1)
  properties: carbon content, fossil 0.75, dry mass 1 kg, heating value, net 40.2 MJ, wet mass 1 kg
- waste mineral oil: -7.56e-6 kg; lognormal variance with pedigree 0.102, pedigree (1,1,3,5,3)
  properties: carbon content, fossil 0.864444, dry mass 0.9 kg, heating value, net 34.7 MJ, water content 0.111111, wet mass 1 kg

## Inputs from nature
- Occupation, lake, artificial [natural resource, land]: 0.018 m2*year; lognormal variance with pedigree 0.052, pedigree (1,1,5,5,3)
- Transformation, from unspecified [natural resource, land]: 0.00012 m2; lognormal variance with pedigree 0.132, pedigree (1,1,5,5,3)
- Transformation, to industrial area [natural resource, land]: 1.22e-6 m2; lognormal variance with pedigree 0.132, pedigree (1,1,5,5,3)
- Transformation, to lake, artificial [natural resource, land]: 0.00011878 m2; lognormal variance with pedigree 0.132, pedigree (1,1,5,5,3)
- Volume occupied, reservoir [natural resource, in water]: 0.15 m3*year; lognormal variance with pedigree 0.132, pedigree (1,1,5,5,3)
- Water, turbine use, unspecified natural origin [natural resource, in water]: 4.3 m3; lognormal variance with pedigree 0.012, pedigree (1,1,5,5,3)

## Emissions to nature
- Carbon dioxide, from soil or biomass stock [air, non-urban air or from high stacks]: 0.0188137 kg; lognormal variance with pedigree 0.0992, pedigree (5,3,5,4,3)
- Dinitrogen monoxide [air, non-urban air or from high stacks]: 4.0059e-8 kg; lognormal variance with pedigree 0.102, pedigree (1,1,5,5,3)
- Methane, non-fossil [air, non-urban air or from high stacks]: 0.00011 kg; lognormal variance with pedigree 0.0992, pedigree (5,3,5,4,3)
- Water [air, unspecified]: 0.000292217 m3; lognormal variance with pedigree 0.0407, pedigree (2,2,3,1,1)
- Water [water, unspecified]: 4.29971 m3; lognormal variance with pedigree 0.092025, pedigree (4,4,5,2,4)

## Sampling procedure
Sampling procedure based on literature. Some information regarding the results is given without source notes or detailed, comprehensible derivation due to the guaranteed confidential treatment of data.

## Extrapolations
This dataset has been extrapolated from an original dataset covering the geography CH (Switzerland), which in his turn is extrapolated from a dataset for electricity production in a reservoir plant without pumping. The uncertainty has been adjusted accordingly.

## Review by Carl Vadenbo 2015-04-17
[This dataset has passed through a streamlined review process where the underlying modelling of production volumes and technology shares was reviewed in detail prior to the dataset being submitted to the ecoinvent database.]
