# refinery gas, burned in furnace

Dataset: EcoSpold 2, unit process
Geography: Europe without Switzerland
Time period: 1980-01-01 to 2022-12-31
Technology level: current
Classification: EcoSpold01Categories: oil/heating systems
Classification: ISIC rev.4 ecoinvent: 3530:Steam and air conditioning supply
Scenario: Business-as-Usual
System model: Substitution, consequential, long-term
Share of production covered: 5 %
Generated by: Niels Jungbluth
Published in: Jungbluth, N. 2007
Database: ecoinvent
isCopyrightProtected: true
accessRestrictedTo: 1

## General comment
Description of the direct emissions due to the combustion of refinery gas in refinery furnaces and generators not including the infrastructure of the furnace.
[This dataset was already contained in the ecoinvent database version 2. It was not individually updated during the transfer to ecoinvent version 3. Life Cycle Impact Assessment results may still have changed, as they are affected by changes in the supply chain, i.e. in other datasets. This dataset was generated following the ecoinvent quality guidelines for version 2. It may have been subject to central changes described in the ecoinvent version 3 change report (http://www.ecoinvent.org/database/ecoinvent-version-3/reports-of-changes/), and the results of the central updates were reviewed extensively. The changes added e.g. consistent water flows and other information throughout the database. The documentation of this dataset can be found in the ecoinvent reports of version 2, which are still available via the ecoinvent website. The change report linked above covers all central changes that were made during the conversion process.]

## Included activities end
Consumption of refinery gas and combustion emissions.

## Geography
Data for single European plants.

## Technology
Average technology in use. There might be large differences for single plants due to the technology used for the flue gas treatment.

## Time period
New European data from single plants for regulated emissions like CO2, NOx, SOx etc. have been provided in the literature. They have been compared and discussed with older literature data.

## Reference product
- heat, district or industrial, other than natural gas: 1 MJ; By-product classification allocatable product; CPC 17300: Steam and hot water
  production volume 1.2887 MJ
  properties: carbon allocation 0 kg, carbon content 0, corresponding fuel use, propane, furnace >100kW 1.05263 MJ, heating value, net 1 MJ, price 0.0106 EUR2005

## Inputs from technosphere
- refinery gas: 0.0199 kg; lognormal variance with pedigree 0.0181, pedigree (3,4,5,3,1)
  properties: carbon content, fossil 0.77, dry mass 1 kg, heating value, net 50.3 MJ, wet mass 1 kg

## Emissions to nature
- Carbon dioxide, fossil [air, urban air close to ground]: 0.0561 kg; lognormal variance with pedigree 0.0221, pedigree (3,4,5,3,1)
- Carbon monoxide, fossil [air, urban air close to ground]: 1.5e-5 kg; lognormal variance with pedigree 0.6721, pedigree (3,4,5,3,1)
- Mercury II [air, urban air close to ground]: 1.39e-9 kg; lognormal variance with pedigree 0.6721, pedigree (3,4,5,3,1)
- Methane, fossil [air, urban air close to ground]: 4.97e-6 kg; lognormal variance with pedigree 0.0621, pedigree (3,4,5,3,1)
- NMVOC, non-methane volatile organic compounds [air, urban air close to ground]: 4.97e-6 kg; lognormal variance with pedigree 0.1421, pedigree (3,4,5,3,1)
- Nitrogen oxides [air, urban air close to ground]: 4.51e-5 kg; lognormal variance with pedigree 0.28, pedigree (1,1,5,1,1)
- Particulate Matter, < 2.5 um [air, urban air close to ground]: 5.46e-6 kg; lognormal variance with pedigree 0.1228, pedigree (2,4,5,1,1)
- Radon-222 [air, non-urban air or from high stacks]: 0.00636 kBq; lognormal variance with pedigree 0.1228, pedigree (2,4,5,1,1)
- Sulfur dioxide [air, urban air close to ground]: 2.78e-5 kg; lognormal variance with pedigree 1.75, pedigree (1,1,5,1,1)

## Sampling procedure
Environmental reports and literature data.

## Extrapolations
From single plants to average situation.

## Review by Michael Spielmann (obsolete) 2003-07-04
passed.

## Review by Bo Weidema 2012-03-18
Passed for upload to database, in order to enable calculation check. The dataset will later be re/submitted for a more thorough review.
