# heat production, mixed logs, at furnace 30kW, state-of-the-art 2014

Dataset: EcoSpold 2, unit process
Geography: RoW
Time period: 2014-01-01 to 2022-12-31
Technology level: modern
Classification: EcoSpold01Categories: wood energy/heating systems
Classification: ISIC rev.4 ecoinvent: 3530:Steam and air conditioning supply
Scenario: Business-as-Usual
System model: Substitution, consequential, long-term
Share of production covered: 0.1 %
Generated by: Christian Bauer
Published in: Bauer, C. 2007
Database: ecoinvent
isCopyrightProtected: true
accessRestrictedTo: 1

## General comment
This activity represents heat production from combustion of wood logs in Switzerland in a new (=installed in 2014) furnace and is used for the global activity as first approximation (uncertainty factors adjusted accordingly). Wood log LHV=9430 MJ/m3. It is supposed to be representative for average new installations. The inventory shall be considered valid for wood log boilers with nominal capacities in the range of 15-50 kW.
Some emission data are from the late 1990's; key emission parameters (CO, PM, NOx, CH4, NMVOC) have been updated according to latest available data. The activity represents average annual operation including start-stop and part-load operation, which results in a reduced efficiency and increasing emissions compared to manufacturer information.
[This dataset was already contained in the ecoinvent database version 2. It was not individually updated during the transfer to ecoinvent version 3. Life Cycle Impact Assessment results may still have changed, as they are affected by changes in the supply chain, i.e. in other datasets. This dataset was generated following the ecoinvent quality guidelines for version 2. It may have been subject to central changes described in the ecoinvent version 3 change report (http://www.ecoinvent.org/database/ecoinvent-version-3/reports-of-changes/), and the results of the central updates were reviewed extensively. The changes added e.g. consistent water flows and other information throughout the database. The documentation of this dataset can be found in the ecoinvent reports of version 2, which are still available via the ecoinvent website. The change report linked above covers all central changes that were made during the conversion process.]

## Included activities start
From delivery of wood logs.

## Included activities end
This module describes the combustion of natural wood logs in a modern boiler. Included are the infrastructure, the wood requirements, the emissions to air, the electricity needed for operation, and the disposal of the ashes.

## Geography
Inventory represents Swiss conditions and was used as global activity as first approximation.

## Technology
New boiler technology to be installed today.

## Time period
Key emission factors PM, CO, NMVOC, NOx, CH4 were aupdated according to latest available information. Other emission data (which hardly depend on the combustion technology) are from the second half of the 1990´s.

## Parameters
- scaling factor: 1.33333 dimensionless; name scaling_factor; = 1/0.75; lognormal variance with pedigree 0.0043, pedigree (2,2,1,5,2)
  The scaling factor represents the inverse of the average annual efficiency of the boiler. This efficiency corresponds to average annual operation including start/stop (warm up / cool down) and will therefore be lower than nameplate efficiencies provided by manufacturers. Value according to personal information from Thomas Nussbaumer, Verenum, Switzerland (January 2014).
- share of hardwood: 0.878 dimensionless; name share_hardwood
  Note that the hardwood and softwood shares do not add to 1. The difference is from industrial wood.
- share of softwood: 0.083 dimensionless; name share_softwood
  (same comment as for share of hardwood)

## Reference product
- heat, central or small-scale, other than natural gas: 1 MJ; By-product classification allocatable product; CPC 17300: Steam and hot water
  production volume 2.43756e10 MJ
  properties: carbon allocation 0 kg, carbon content 0, heating value, net 1 MJ, price 0.0106 EUR2005

## Inputs from technosphere
- cleft timber, measured as dry mass: 0.0676911, 0.00161489, 0.00256063 kg (3 suppliers, which the file names only by identifier); sum of these 0.0718667 kg; lognormal variance with pedigree 0.013, pedigree (2,2,4,5,2)
  properties: apparent wood density 491.9 kg/m3, basic wood density 378.4, carbon content, non-fossil 0.494, dry mass 1 kg, dry wood density 430 kg/m3, heating value, gross 20.4 MJ, heating value, net 14.46 MJ, water content 0.3, wet mass 1.3 kg
- electricity, low voltage: 0.000141891, 5.15815e-5, 1.05496e-5, 4.19667e-5, 0.000302558, 0.000281678, 0.00252569, 0.000350752 kWh (8 suppliers, which the file names only by identifier); sum of these 0.00370667 kWh; lognormal variance with pedigree 0.44, pedigree (2,2,5,5,1)
- furnace, logs, 30kW: 3.08642e-7 unit; lognormal variance with pedigree 0.034, pedigree (2,2,5,5,2)
- wood ash mixture, pure: -0.000504643, -0.000242024 kg (2 suppliers, which the file names only by identifier); sum of these -0.000746667 kg; lognormal variance with pedigree 0.021, pedigree (2,2,4,5,1)
  properties: carbon content, non-fossil 0.012, dry mass 1 kg, wet mass 1 kg

## Emissions to nature
- Acetaldehyde [air, urban air close to ground]: 8.13333e-8 kg; lognormal variance with pedigree 0.44, pedigree (2,2,5,5,1)
- Ammonia [air, urban air close to ground]: 2.30667e-6 kg; lognormal variance with pedigree 0.44, pedigree (2,2,5,5,1)
- Arsenic ion [air, urban air close to ground]: 1.33333e-9 kg; lognormal variance with pedigree 0.44, pedigree (2,2,5,5,1)
- Benzene [air, urban air close to ground]: 1.21333e-6 kg; lognormal variance with pedigree 0.44, pedigree (2,2,5,5,1)
- Benzene, ethyl- [air, urban air close to ground]: 4e-8 kg; lognormal variance with pedigree 0.44, pedigree (2,2,5,5,1)
- Benzene, hexachloro- [air, urban air close to ground]: 9.6e-15 kg; lognormal variance with pedigree 0.44, pedigree (2,2,5,5,1)
- Benzo(a)pyrene [air, urban air close to ground]: 6.66667e-10 kg; lognormal variance with pedigree 0.44, pedigree (2,2,5,5,1)
- Bromine [air, urban air close to ground]: 8e-8 kg; lognormal variance with pedigree 0.44, pedigree (2,2,5,5,1)
- Cadmium II [air, urban air close to ground]: 9.33333e-10 kg; lognormal variance with pedigree 0.44, pedigree (2,2,5,5,1)
- Calcium [air, urban air close to ground]: 7.8e-6 kg; lognormal variance with pedigree 0.44, pedigree (2,2,5,5,1)
- Carbon dioxide, non-fossil [air, urban air close to ground]: 0.1308 kg; lognormal variance with pedigree 0.44, pedigree (2,2,5,5,1)
- Carbon monoxide, non-fossil [air, urban air close to ground]: 0.00166667 kg; lognormal variance with pedigree 0.43, pedigree (2,2,4,5,1)
- Chlorine [air, urban air close to ground]: 2.4e-7 kg; lognormal variance with pedigree 0.44, pedigree (2,2,5,5,1)
- Chromium III [air, urban air close to ground]: 5.28e-9 kg; lognormal variance with pedigree 0.44, pedigree (2,2,5,5,1)
- Chromium VI [air, urban air close to ground]: 5.33333e-11 kg; lognormal variance with pedigree 0.44, pedigree (2,2,5,5,1)
- Copper ion [air, urban air close to ground]: 2.93333e-8 kg; lognormal variance with pedigree 0.44, pedigree (2,2,5,5,1)
- Dinitrogen monoxide [air, urban air close to ground]: 5.33333e-6 kg; lognormal variance with pedigree 0.44, pedigree (2,2,5,5,1)
- Dioxins, measured as 2,3,7,8-tetrachlorodibenzo-p-dioxin [air, urban air close to ground]: 4.13333e-14 kg; lognormal variance with pedigree 0.44, pedigree (2,2,5,5,1)
- Fluorine [air, urban air close to ground]: 6.66667e-8 kg; lognormal variance with pedigree 0.44, pedigree (2,2,5,5,1)
- Formaldehyde [air, urban air close to ground]: 1.73333e-7 kg; lognormal variance with pedigree 0.44, pedigree (2,2,5,5,1)
- Hydrocarbons, aliphatic, alkanes, unspecified [air, urban air close to ground]: 1.21333e-6 kg; lognormal variance with pedigree 0.44, pedigree (2,2,5,5,1)
- Hydrocarbons, aliphatic, unsaturated [air, urban air close to ground]: 4.13333e-6 kg; lognormal variance with pedigree 0.44, pedigree (2,2,5,5,1)
- Lead II [air, urban air close to ground]: 3.33333e-8 kg; lognormal variance with pedigree 0.44, pedigree (2,2,5,5,1)
- Magnesium [air, urban air close to ground]: 4.8e-7 kg; lognormal variance with pedigree 0.44, pedigree (2,2,5,5,1)
- Manganese II [air, urban air close to ground]: 2.26667e-7 kg; lognormal variance with pedigree 0.44, pedigree (2,2,5,5,1)
- Mercury II [air, urban air close to ground]: 4e-10 kg; lognormal variance with pedigree 0.44, pedigree (2,2,5,5,1)
- Methane, non-fossil [air, urban air close to ground]: 1.52e-5 kg; lognormal variance with pedigree 0.43, pedigree (2,2,4,5,1)
- NMVOC, non-methane volatile organic compounds [air, urban air close to ground]: 3.54667e-5 kg; lognormal variance with pedigree 0.43, pedigree (2,2,4,5,1)
- Nickel II [air, urban air close to ground]: 8e-9 kg; lognormal variance with pedigree 0.44, pedigree (2,2,5,5,1)
- Nitrogen oxides [air, urban air close to ground]: 0.000106667 kg; lognormal variance with pedigree 0.43, pedigree (2,2,4,5,1)
- PAH, polycyclic aromatic hydrocarbons [air, urban air close to ground]: 1.48e-8 kg; lognormal variance with pedigree 0.44, pedigree (2,2,5,5,1)
- Particulate Matter, < 2.5 um [air, urban air close to ground]: 4.8e-5 kg; lognormal variance with pedigree 0.43, pedigree (2,2,4,5,1)
- Particulate Matter, > 2.5 um and < 10um [air, urban air close to ground]: 2.66667e-6 kg; lognormal variance with pedigree 0.43, pedigree (2,2,4,5,1)
- Phenol, pentachloro- [air, urban air close to ground]: 1.08e-11 kg; lognormal variance with pedigree 0.44, pedigree (2,2,5,5,1)
- Phosphorus [air, urban air close to ground]: 4e-7 kg; lognormal variance with pedigree 0.44, pedigree (2,2,5,5,1)
- Potassium I [air, urban air close to ground]: 3.12e-5 kg; lognormal variance with pedigree 0.44, pedigree (2,2,5,5,1)
- Sodium [air, urban air close to ground]: 1.73333e-6 kg; lognormal variance with pedigree 0.44, pedigree (2,2,5,5,1)
- Sulfur dioxide [air, urban air close to ground]: 3.33333e-6 kg; lognormal variance with pedigree 0.44, pedigree (2,2,5,5,1)
- Toluene [air, urban air close to ground]: 4e-7 kg; lognormal variance with pedigree 0.44, pedigree (2,2,5,5,1)
- Water [air, urban air close to ground]: 1.55e-5 m3; lognormal variance with pedigree 0.0083, pedigree (2,2,4,5,2)
- Zinc II [air, urban air close to ground]: 4e-7 kg; lognormal variance with pedigree 0.44, pedigree (2,2,5,5,1)
- m-Xylene [air, urban air close to ground]: 1.6e-7 kg; lognormal variance with pedigree 0.44, pedigree (2,2,5,5,1)

## Sampling procedure
literature and expert judgement

## Extrapolations
This dataset has been copied from an original dataset covering the geography CH. The uncertainty has been adjusted accordingly.

## Review by Emilia Moreno Ruiz 2014-06-03
input changed to cleft timber
