# deinking emulsion production, in paper production

Dataset: EcoSpold 2, unit process
Geography: RoW
Time period: 2000-01-01 to 2022-12-31
Technology level: current
Classification: EcoSpold01Categories: chemicals/inorganics
Classification: ISIC rev.4 ecoinvent: 2011:Manufacture of basic chemicals
Tags: ConvertedDataset
Scenario: Business-as-Usual
System model: Substitution, consequential, long-term
Generated by: Roland Hischier
Published in: Hischier R. 2007
Database: ecoinvent
isCopyrightProtected: true
accessRestrictedTo: 1

## General comment
The functional unit represent 1 kg of deinking emulsion. Very large uncertainty of the process data, as only a mixture of different materials is included.
[This dataset was already contained in the ecoinvent database version 2. It was not individually updated during the transfer to ecoinvent version 3. Life Cycle Impact Assessment results may still have changed, as they are affected by changes in the supply chain, i.e. in other datasets. This dataset was generated following the ecoinvent quality guidelines for version 2. It may have been subject to central changes described in the ecoinvent version 3 change report (http://www.ecoinvent.org/database/ecoinvent-version-3/reports-of-changes/), and the results of the central updates were reviewed extensively. The changes added e.g. consistent water flows and other information throughout the database. The documentation of this dataset can be found in the ecoinvent reports of version 2, which are still available via the ecoinvent website. The change report linked above covers all central changes that were made during the conversion process.]

## Included activities end
Mixture of hydrogen peroxide, sodium hydroxide, silica and fatty acid. Only input of mentioned substances is taken into account.

## Geography
Data used has no specific geographical origin (average from different indications in literature). Data are used as European average data.

## Technology
mixture of different substances without any further inputs/outputs

## Reference product
- deinking emulsion, in paper production: 1 kg; By-product classification allocatable product; CPC 34: Basic chemicals
  production volume 2.67763 kg
  properties: carbon allocation 0.0816986 kg, carbon content 0.0816986, carbon content, fossil 0.00369863, carbon content, non-fossil 0.078, dry mass 1 kg, heating value, net 2.48 MJ, price 1.9 EUR2005, water content 0, water in wet mass 0 kg, wet mass 1 kg

## Inputs from technosphere
All rows: lognormal variance with pedigree 0.12, pedigree (5,5,5,5,3)
- EDTA, ethylenediaminetetraacetic acid: 0.009 kg
  properties: carbon content, fossil 0.410959, dry mass 1 kg, heating value, net 19.09 MJ, wet mass 1 kg
- fatty acid: 0.104 kg
  properties: carbon content, non-fossil 0.75, dry mass 1 kg, heating value, net 22.73 MJ, wet mass 1 kg
- hydrogen peroxide, without water, in 50% solution state: 0.217 kg
  properties: dry mass 1 kg, heating value, net 7.13 MJ, wet mass 1 kg
- silica sand: 0.412 kg
  properties: dry mass 0.99 kg, water content 0.010101, wet mass 1 kg
- sodium hydroxide, without water, in 50% solution state: 0.258 kg
  properties: dry mass 1 kg, heating value, net 3.03 MJ, wet mass 1 kg

## Sampling procedure
see technology

## Extrapolations
This dataset has been copied from an original dataset covering the geography RER. The uncertainty has been adjusted accordingly.

## Review by Hans-Jörg Althaus 2003-07-02
passed
