# transport, freight train

Dataset: EcoSpold 2, unit process
Geography: DE
Time period: 2000-01-01 to 2022-12-31
Technology level: current
Classification: EcoSpold01Categories: transport systems/train
Classification: ISIC rev.4 ecoinvent: 4912:Freight rail transport
Scenario: Business-as-Usual
System model: Substitution, consequential, long-term
Share of production covered: 100 %
Generated by: Michael Spielmann (obsolete)
Published in: Spielmann M. 2007
Database: ecoinvent
isCopyrightProtected: true
accessRestrictedTo: 1

## General comment
The dataset represents the entire transport life cycle of a freight train in Germany. The data of the energy use and operation emissions are average data for the operation of goods transportation by rail in Germany. The data has been determined top down, by combining the total yearly energy consumption and the yearly tkm-performance of goods transportation.

## Included activities start
The dataset starts with the production of a locomotive.

## Included activities end
The dataset ends with the service of transporting 1 ton over a distance of 1 km by a freight train. The dataset includes the production and the maintenance of the locomotive and the goods wagon, the construction of the railway track and the energy use and operation emission of a freight train using diesel and electricity.
The inventory includes as well the actual energy consumption for an average goods train (999Gt) in Germany using electro and diesel energy. In addition the diesel consumption and emissions of shunting processes are accounted for.

## Geography
The data for rail infrastructure reflect Swiss conditions. Data for vehicle manufacturing and maintenance represents generic European data. Data of the energy use and operation emissions refers to average goods transport conditions in Germany, some extrapolation from Switzerland has been made: diesel consumption for shunting, particle matters from abrasion processes

## Technology
Demand factors of various transport components required to fulfill the functional unit of one tkm fright transport are presented. In order to account for the fact that the same rail tracks are used for both passenger and goods transportation are applied allocation factors. The module operation of goods trains comprises both; the actual performance of goods trains as well as required shunting processes. A distinction between the type of traction, diesel and electricity is important since in most European countries diesel and electro locomotives are in operation for both goods transportation and passenger transportation. With the transport performance factors, one may calculate the specific energy consumption per tkm. The typical diesel consumption of 0.68g/tkm for shunting has been added to the specific energy demand (see also version 2 report 16 "Documentation of changes implemented in ecoinvent Data v2.1 and v2.2" (2010) section 7.2.2 "Operation of Goods Trains in selected European countries (Germany, France, Italy, Austria, Belgium)"). Iron emissions to soil are accounted for employing the figure for Swiss operation services. Emission of lubricates due to traction are not accounted for, since measures are in operation to avoid such emissions.

## Time period
Data for emission indices for shunting is based on figures of 1995, specific energy consumption per tkm is from 2010

## Reference product
- transport, freight train: 1 metric ton*km; By-product classification allocatable product; CPC 6512: Railway transport services of freight
  properties: carbon allocation 0 kg, carbon content 0, price 0.026 EUR2005

## Inputs from technosphere
All rows: lognormal variance with pedigree 0, pedigree (1,1,5,1,1)
- diesel: 0.0020919 kg
  properties: carbon content, fossil 0.865, dry mass 1 kg, heating value, net 42.8 MJ, wet mass 1 kg
- electricity, high voltage: 0.05933 kWh
- goods wagon: 4.59e-8 unit
- locomotive: 7.11e-10 unit
- maintenance, goods wagon: 4.59e-8 unit
- maintenance, locomotive: 7.11e-10 unit
- railway track: 8.6255e-5 m*year

## Emissions to nature
All rows: lognormal variance with pedigree 0, pedigree (1,1,5,1,1)
- Ammonia [air, unspecified]: 4.1714e-8 kg
- Benzene [air, unspecified]: 2.0919e-7 kg
- Cadmium II [air, unspecified]: 2.0919e-11 kg
- Carbon dioxide, fossil [air, unspecified]: 0.0065815 kg
- Carbon monoxide, fossil [air, unspecified]: 3.3062e-5 kg
- Chromium III [air, unspecified]: 1.0475e-10 kg
- Copper ion [air, unspecified]: 3.5534e-9 kg
- Dinitrogen monoxide [air, unspecified]: 2.0919e-7 kg
- Lead II [air, unspecified]: 2.302e-13 kg
- Mercury II [air, unspecified]: 4.1714e-14 kg
- Methane, fossil [air, unspecified]: 2.7191e-7 kg
- NMVOC, non-methane volatile organic compounds [air, unspecified]: 1.0598e-5 kg
- Nickel II [air, unspecified]: 1.4646e-10 kg
- Nitrogen oxides [air, unspecified]: 0.00011494 kg
- Particulate Matter, < 2.5 um [air, unspecified]: 2.6838e-6 kg
- Particulate Matter, > 10 um [air, unspecified]: 1.5878e-5 kg
- Particulate Matter, > 2.5 um and < 10um [air, unspecified]: 6.9824e-6 kg
- Selenium IV [air, unspecified]: 2.0919e-11 kg
- Sulfur dioxide [air, unspecified]: 1.2545e-6 kg
- Sulfur hexafluoride [air, unspecified]: 2.6105e-9 kg
- Toluene [air, unspecified]: 8.3736e-8 kg
- Xylene [air, unspecified]: 8.3736e-8 kg
- Zinc II [air, unspecified]: 2.0919e-9 kg
- Iron ion [soil, unspecified]: 1.7786e-5 kg

## Sampling procedure
International Railway statistic

## Extrapolations
see Technology and Geography

## Review by Christian Bauer 2010-02-07
passed.

## Review by Roland Hischier 2011-09-28
Transfer of documentation done.

## Review by Carl Vadenbo 2012-06-29
In preparation for the release of ecoinvent v3.0, the datasets 'operation, freight train DE'' and 'transport, freight train DE' in ecoinvent v2.2 were merged into the dataset 'transport, freight train, DE 2000-2007'. The amounts of the exchanges were reviewed and were found to correspond to the disaggregated datasets. The uncertainty information need to be revised before subsequent releases of the database. Despite this shortcoming, the new dataset was accepted for inclusion into the ecoinvent database on 2012.07.04.
