# display production, liquid crystal, 17 inches

Dataset: EcoSpold 2, unit process
Geography: GLO
Time period: 2001-01-01 to 2022-12-31
Technology level: current
Classification: EcoSpold01Categories: electronics/devices
Classification: ISIC rev.4 ecoinvent: 2620:Manufacture of computers and peripheral equipment
Tags: ConvertedDataset
Scenario: Business-as-Usual
System model: Substitution, consequential, long-term
Generated by: Roland Hischier
Published in: Hischier R. 2007
Database: ecoinvent
isCopyrightProtected: true
accessRestrictedTo: 1

## General comment
This dataset represents the production of 1 unit the complete TFT-LCD computer screen. It represents the various components of TFT-LCD computer screen – i.e. the LCD panel, control electronics as well as the respective frame parts. Main data are based on information from a European Research project dealing with the recycling / reuse of currently used TFT-LCD screens for personal computers and US-EPA LCA study about LCD and CRT production dealing with 15 inch devices. The total weight is based on an internet survey of 90 different 17-inch LCD screens on the market. The production efforts are included into a separate dataset.
[This dataset was already contained in the ecoinvent database version 2. It was not individually updated during the transfer to ecoinvent version 3. Life Cycle Impact Assessment results may still have changed, as they are affected by changes in the supply chain, i.e. in other datasets. This dataset was generated following the ecoinvent quality guidelines for version 2. It may have been subject to central changes described in the ecoinvent version 3 change report (http://www.ecoinvent.org/database/ecoinvent-version-3/reports-of-changes/), and the results of the central updates were reviewed extensively. The changes added e.g. consistent water flows and other information throughout the database. The documentation of this dataset can be found in the ecoinvent reports of version 2, which are still available via the ecoinvent website. The change report linked above covers all central changes that were made during the conversion process.]

## Included activities start
From reception of raw materials and auxiliares at the factory gate.

## Included activities end
This dataset includes the various parts of a complete 17-inch computer LCD screen. All further efforts (auxiliaries, energy, emissions, waste) are included in a separate dataset linked.

## Geography
Data from research project & internet survey information

## Technology
17 inch, a-Si, TFT LCD color screen

## Reference product
- display, liquid crystal, 17 inches: 1 unit; By-product classification allocatable product; CPC 47315: Monitors and projectors, principally used in an automatic data processing system
  production volume 1 unit
  properties: carbon allocation 1.58084 kg, carbon content 0.309968, carbon content, fossil 0.309893, carbon content, non-fossil 7.50159e-5, dry mass 5.1 kg, price 135.6 EUR2005, water content 0, water in wet mass 0 kg, wet mass 5.1 kg

## Inputs from technosphere
- acrylonitrile-butadiene-styrene copolymer: 0.247 kg; lognormal variance with pedigree 0.0006, pedigree (1,3,5,1,1)
  properties: carbon content, fossil 0.853081, dry mass 1 kg, heating value, net 35.58 MJ, wet mass 1 kg
- aluminium, cast alloy: 0.18976 kg; lognormal variance with pedigree 0.0006, pedigree (1,3,5,1,1)
  properties: dry mass 1 kg, wet mass 1 kg
- aluminium, wrought alloy: 0.40324 kg; lognormal variance with pedigree 0.0006, pedigree (1,3,5,1,1)
  properties: dry mass 1 kg, wet mass 1 kg
- assembly of liquid crystal display, auxilliaries and energy use: 5.1 kg; lognormal variance with pedigree 0.0006, pedigree (1,3,5,1,1)
- corrugated board box: 0.448827, 0.00720299, 0.193368, 0.175601 kg (4 suppliers, which the file names only by identifier); sum of these 0.825 kg; lognormal variance with pedigree 0.02, pedigree (4,4,5,1,1)
  properties: carbon content, fossil 0.00365437, carbon content, non-fossil 0.450248, dry mass 0.945 kg, heating value, net 12.86 MJ, water content 0.0582011, wet mass 1 kg
- injection moulding: 0.247 kg; lognormal variance with pedigree 0.0006, pedigree (1,3,5,1,1)
- liquid crystal display, unmounted: 4.006 kg; lognormal variance with pedigree 0.0006, pedigree (1,3,5,1,1)
  properties: carbon content, fossil 0.327872, carbon content, non-fossil 4.20542e-5, dry mass 1 kg, wet mass 1 kg
- polystyrene, expandable: 0.675 kg; lognormal variance with pedigree 0.02, pedigree (4,4,5,1,1)
  properties: carbon content, fossil 0.923077, dry mass 1 kg, heating value, net 38.67 MJ, wet mass 1 kg
- printed wiring board, surface mounted, unspecified, Pb containing: 0.03345 kg; lognormal variance with pedigree 0.0006, pedigree (1,3,5,1,1)
  properties: carbon content, fossil 0.132522, dry mass 1 kg, wet mass 1 kg
- printed wiring board, surface mounted, unspecified, Pb free: 0.07805 kg; lognormal variance with pedigree 0.0006, pedigree (1,3,5,1,1)
  properties: carbon content, fossil 0.132522, dry mass 1 kg, wet mass 1 kg
- printed wiring board, through-hole mounted, unspecified, Pb containing: 0.03345 kg; lognormal variance with pedigree 0.0006, pedigree (1,3,5,1,1)
  properties: carbon content, fossil 0.132522, dry mass 1 kg, wet mass 1 kg
- printed wiring board, through-hole mounted, unspecified, Pb free: 0.07805 kg; lognormal variance with pedigree 0.0006, pedigree (1,3,5,1,1)
  properties: carbon content, fossil 0.132522, dry mass 1 kg, wet mass 1 kg
- section bar extrusion, aluminium: 0.2965 kg; lognormal variance with pedigree 0.0006, pedigree (1,3,5,1,1)
- sheet rolling, aluminium: 0.2965 kg; lognormal variance with pedigree 0.0006, pedigree (1,3,5,1,1)
- steel, chromium steel 18/8, hot rolled: 0.007 kg; lognormal variance with pedigree 0.0006, pedigree (1,3,5,1,1)
  properties: carbon content, fossil 0.0008, dry mass 1 kg, wet mass 1 kg
- synthetic rubber: 0.015 kg; lognormal variance with pedigree 0.0006, pedigree (1,3,5,1,1)
  properties: carbon content, fossil 0.871949, dry mass 1 kg, heating value, net 26.42 MJ, wet mass 1 kg

## Sampling procedure
EU research & own estimations

## Review by Jürgen Sutter 2009-01-22
passed.
