# board, softwood, raw, kiln drying to u=10%

Dataset: EcoSpold 2, unit process
Geography: Europe without Switzerland
Time period: 2011-01-01 to 2022-12-31
Technology level: current
Classification: ISIC rev.4 ecoinvent: 1610:Sawmilling and planing of wood
Tags: Swiss brush-up completed
Scenario: Business-as-Usual
System model: Substitution, consequential, long-term
Generated by: Frank Werner
Published in: Bauer, C. 2007
Database: ecoinvent
isCopyrightProtected: true
accessRestrictedTo: 1

## General comment
This dataset represents the service of kiln drying of one m3 sawn softwood board. The wood chip used in the process is considered to be supplied internally which are generated from slabs and sidings when sawing. Characteristics of the of wood chips to be burned: Dry wood density 440 kg/m3;the low heating value 3007 MJ/m3., humidity when burned is estimated to be around 50%, which is achieved after some weeks of drying in the storage. Air emission factors as well as the boiler efficiency represent average annual operation including start and stop (warm-up and shut-down). The boiler used is considered to be 300 kW and emission profile refers to the facility. Shrinkage ratio of between the moisture content of u=30% - 0% is 0.004 %/%.
The data was provided by and approved by the Swiss forest industry (Holzindustrie Schweiz HIS).
Within ecoinvent, three products - boards, beams and laths - are distinguished:

## Included activities start
Kiln drying process starting from sawn softwood, at the sawmill site, assumed to lose some water before the start of the kiln drying process.

## Included activities end
This activity ends with kiln dried softwood board, at sawmill. The dataset includes kiln drying of wet wood assumed as u=60% down to u=10%,shrinkage and emissions associated with wood chip incineration. The dataset does not include air emissions released from the wood, as the emissions are assumed to be comparable to emissions from natural drying during decompostion/rotting.

## Geography
Represents average Swiss conditions assumed to be represenative for Europe

## Parameters
- emission of Fluorine: 6.66667e-8 kg/MJ; name Fluorine; = 0.00000005*scaling_factor
  updated emission profile based on personal communication, PSI, 2014
- emission of Formaldehyde: 1.73333e-7 kg/MJ; name Formaldehyde; = 0.00000013*scaling_factor
  updated emission profile based on personal communication, PSI, 2014
- emission of Hydrocarbons, aliphatic, alkanes, unspecified: 1.21333e-6 kg/MJ; name Hydrocarbons_aliphatic_alkanes; = 0.00000091*scaling_factor
  updated emission profile based on personal communication, PSI, 2014
- emission of Hydrocarbons, aliphatic, unsaturated: 4.13333e-6 kg/MJ; name Hydrocarbons_aliphatic; = 0.0000031*scaling_factor
  updated emission profile based on personal communication, PSI, 2014
- emission of Magnesium: 4.8e-7 kg/MJ; name magnesium; = 0.00000036*scaling_factor
  updated emission profile based on personal communication, PSI, 2014
- emission of Manganese: 2.26667e-7 kg/MJ; name manganese; = 0.00000017*scaling_factor
  updated emission profile based on personal communication, PSI, 2014
- emission of Mercury: 4e-10 kg/MJ; name mercury; = 0.0000000003*scaling_factor
  updated emission profile based on personal communication, PSI, 2014
- emission of Methane, non-fossil: 5.33333e-7 kg/MJ; name Methane_nonfossil; = 0.0000004*scaling_factor
  updated emission profile based on personal communication, PSI, 2014
- emission of Nickel: 8e-9 kg/MJ; name nickel; = 0.000000006*scaling_factor
  updated emission profile based on personal communication, PSI, 2014
- emission of Nitrogen oxides: 0.00024 kg/MJ; name no2; = 0.00018*scaling_factor
  updated emission profile based on personal communication, PSI, 2014
- emission of Particulates 2.5: 0.00012 kg/MJ; name Particulate2_5; = 90E-06*scaling_factor
  updated emission profile based on personal communication, PSI, 2014
- emission of Particulates >10: 6.66667e-6 kg/MJ; name Particulates_higher_10; = 5E-06 * scaling_factor
  updated emission profile based on personal communication, PSI, 2014
- emission of Particulates >2.5 to <10: 6.66667e-6 kg/MJ; name Particulates2_5_to_10; = 5E-06 * scaling_factor
  updated emission profile based on personal communication, PSI, 2014
- emission of Phenol, pentachloro-: 1.08e-11 kg/MJ; name Phenol_pentachloro; = 0.0000000000081*scaling_factor
  updated emission profile based on personal communication, PSI, 2014
- emission of Phosphorus: 4e-7 kg/MJ; name Phosphorus; = 0.0000003*scaling_factor
  updated emission profile based on personal communication, PSI, 2014
- emission of Potassium: 3.12e-5 kg/MJ; name Potassium; = 0.0000234*scaling_factor
  updated emission profile based on personal communication, PSI, 2014
- emission of acetaldehyde: 8.13333e-8 kg/MJ; name acet; = 0.000000061*scaling_factor
  updated emission profile based on personal communication, PSI, 2014
- emission of ammonia: 2.30667e-6 kg/MJ; name ammonia; = 0.00000173*scaling_factor
  updated emission profile based on personal communication, PSI, 2014
- emission of arsenic: 1.33333e-9 kg/MJ; name arsenic; = 0.000000001*scaling_factor
  updated emission profile based on personal communication, PSI, 2014
- emission of benzene: 1.21333e-6 kg/MJ; name benzene; = 0.00000091*scaling_factor
  updated emission profile based on personal communication, PSI, 2014
- emission of benzene, ethyl: 4e-8 kg/MJ; name ben_ethyl; = 0.00000003*scaling_factor
  updated emission profile based on personal communication, PSI, 2014
- emission of benzene, hexachloro: 9.6e-15 kg/MJ; name ben_hexa; = 0.0000000000000072*scaling_factor
  updated emission profile based on personal communication, PSI, 2014
- emission of benzo(a)pyrene: 6.66667e-10 kg/MJ; name benzo; = 0.0000000005*scaling_factor
  updated emission profile based on personal communication, PSI, 2014
- emission of bromine: 8e-8 kg/MJ; name bro; = 0.00000006*scaling_factor
  updated emission profile based on personal communication, PSI, 2014
- emission of cadmium: 9.33333e-10 kg/MJ; name cadmium; = 0.0000000007*scaling_factor
  updated emission profile based on personal communication, PSI, 2014
- emission of calcium: 7.8e-6 kg/MJ; name calcium; = 0.00000585*scaling_factor
  updated emission profile based on personal communication, PSI, 2014
- emission of carbon monoxide, non-fossil: 0.0004 kg/MJ; name co; = 0.0003*scaling_factor
  updated emission profile based on personal communication, PSI, 2014
- emission of chlorine: 2.4e-7 kg/MJ; name ch; = 0.00000018*scaling_factor
  updated emission profile based on personal communication, PSI, 2014
- emission of chromium: 5.28e-9 kg/MJ; name chromium; = 0.00000000396*scaling_factor
  updated emission profile based on personal communication, PSI, 2014
- emission of chromium 4: 5.33333e-11 kg/MJ; name chroIV; = 0.00000000004*scaling_factor
  updated emission profile based on personal communication, PSI, 2014
- emission of copper: 2.93333e-8 kg/MJ; name copper; = 0.000000022*scaling_factor
  updated emission profile based on personal communication, PSI, 2014
- emission of dinitrogen monoxide: 3.06667e-6 kg/MJ; name N2O; = 0.0000023*scaling_factor
  updated emission profile based on personal communication, PSI, 2014
- emission of dioxin measured as 2,3,7,8-tetrachlorodibenzo-p-dioxin: 4.13333e-14 kg/MJ; name tetrachloro; = 0.000000000000031*scaling_factor
  updated emission profile based on personal communication, PSI, 2014
- emission of lead: 3.33333e-8 kg/MJ; name lead; = 0.000000025*scaling_factor
  updated emission profile based on personal communication, PSI, 2014
- emission of m-Xylene: 1.6e-7 kg/MJ; name mxylene; = 0.00000012*scaling_factor
  updated emission profile based on personal communication, PSI, 2014
- emission of non-methane volatile organic compounds, unspecified origin: 1.4e-5 kg/MJ; name nmvoc; = 10.5E-06 * scaling_factor
  updated emission profile based on personal communication, PSI, 2014
- emission of polycyclic aromatic hydrocarbons: 1.48e-8 kg/MJ; name pah; = 0.0000000111*scaling_factor
  updated emission profile based on personal communication, PSI, 2014
- emission of sodium: 1.73333e-6 kg/MJ; name sodium; = 0.0000013*scaling_factor
  updated emission profile based on personal communication, PSI, 2014
- emission of sulfur dioxide: 3.33333e-6 kg/MJ; name so2; = 0.0000025*scaling_factor
  updated emission profile based on personal communication, PSI, 2014
- emission of toluene: 4e-7 kg/MJ; name toluene; = 0.0000003*scaling_factor
  updated emission profile based on personal communication, PSI, 2014
- emission of zinc: 4e-7 kg/MJ; name zinc; = 0.0000003*scaling_factor
  updated emission profile based on personal communication, PSI, 2014
- furnace, wood chip: 2.31481e-8 unit/MJ; name furnace_energy; = 1/(300*20*2000*3.6)
  inventory of furnace over MJ heating demand
- moisture content board: 10 dimensionless; name moisture_board
  moisture content of board
- moisture content wood chip: 50 dimensionless; name moisture_woodchip
  moisture content of wood chip
- scaling factor: 1.33333 dimensionless; name scaling_factor; = 1/0.75; lognormal variance with pedigree 0.0016, pedigree (2,1,1,1,1)
  The scaling factor corresponds to the inverse of the average annual efficiency of the heating system, including start/stop (warm up and cool down). Therefore, this efficiency will be lower than figures provided by manufacturers. The estimated value was provided by T.Nussbaumer, Verenum, and represents the average installed boiler in this size category in Switzerland.
- shrinkage ratio (u=30% - 0%): 0.004 dimensionless; name shrinkage_ratio
  shrinkage in % of volume per % of change in moisture content between u=30% to 0%
- total heat: 702 MJ; name heat_woodchip
  total thermal energy required for the drying process per m3 of output
- wood ash: 0.000634667 kg/MJ; name woodash; = 0.000476*scaling_factor
  generation of sawdusts per MJ
- wood density, basic: 422.4 kg/m3; name basic_wood_d; = dry_wood_d*(1-moisture_board*shrinkage_ratio)
  kg oven-dry matter/wet volume
- wood density, dry: 440 kg/m3; name dry_wood_d
  kg oven-dry matter/oven-dry volume

## Reference product
- sawnwood, board, softwood, raw, dried (u=10%): 1 m3; By-product classification allocatable product; CPC 31101: Wood, sawn or chipped lengthwise, sliced or peeled, of a thickness exceeding 6 mm, of coniferous wood
  production volume 1.79101e7 m3
  properties: carbon allocation 208.666 kg, carbon content 0.494, carbon content, fossil 0, carbon content, non-fossil 0.494, dry mass 422.4 kg, heating value, net 5700.67 MJ, price 160 EUR2005, water content 0.1, water in wet mass 42.24 kg, wet mass 464.64 kg

## Inputs from technosphere
- electricity, medium voltage: 20 kWh; lognormal variance with pedigree 0.0257, pedigree (2,1,4,3,1)
  properties: UVEK_link_1 1779, UVEK_relative_amount_1 1
- furnace, wood chips, with silo, 300kW: 1.625e-5 unit; lognormal variance with pedigree 0.5512, pedigree (2,1,4,4,1)
  properties: UVEK_link_1 999999, UVEK_relative_amount_1 1
- sawnwood, softwood, raw: 1.08696 m3; lognormal variance with pedigree 0.0262, pedigree (2,1,4,4,1)
  properties: carbon content, non-fossil 0.494, dry mass 387.2 kg, heating value, net 5130.57 MJ, water content 0.7, wet mass 658.24 kg
- technical wood drying facility: 3.66e-6 unit; lognormal variance with pedigree 0.5507, pedigree (2,1,4,3,1)
- wood ash mixture, pure: -0.445536 kg; lognormal variance with pedigree 0.0257, pedigree (2,1,1,3,1)
  properties: UVEK_link_1 1128, UVEK_link_2 1127, UVEK_link_3 1129, UVEK_relative_amount_3 -1, carbon content, non-fossil 0.012, dry mass 1 kg, wet mass 1 kg
- wood chips, wet, measured as dry mass: 50.2685 kg; lognormal variance with pedigree 0.0262, pedigree (2,1,4,4,1)
  properties: carbon content, non-fossil 0.494, dry mass 1 kg, heating value, gross 20.4 MJ, heating value, net 12.4133 MJ, water content 0.5, wet mass 1.5 kg

## Emissions to nature
- Acetaldehyde [air, urban air close to ground]: 5.7096e-5 kg; lognormal variance with pedigree 0.2007, pedigree (2,1,4,3,1)
- Ammonia [air, urban air close to ground]: 0.00161928 kg; lognormal variance with pedigree 0.2007, pedigree (2,1,4,3,1)
- Arsenic ion [air, urban air close to ground]: 9.36e-7 kg; lognormal variance with pedigree 0.2007, pedigree (2,1,4,3,1)
- Benzene [air, urban air close to ground]: 0.00085176 kg; lognormal variance with pedigree 0.2007, pedigree (2,1,4,3,1)
- Benzene, ethyl- [air, urban air close to ground]: 2.808e-5 kg; lognormal variance with pedigree 0.2007, pedigree (2,1,4,3,1)
- Benzene, hexachloro- [air, urban air close to ground]: 6.7392e-12 kg; lognormal variance with pedigree 0.2007, pedigree (2,1,4,3,1)
- Benzo(a)pyrene [air, urban air close to ground]: 4.68e-7 kg; lognormal variance with pedigree 0.5507, pedigree (2,1,4,3,1)
- Bromine [air, urban air close to ground]: 5.616e-5 kg; lognormal variance with pedigree 0.8007, pedigree (2,1,4,3,1)
- Cadmium II [air, urban air close to ground]: 6.552e-7 kg; lognormal variance with pedigree 0.8007, pedigree (2,1,4,3,1)
- Calcium [air, urban air close to ground]: 0.0054756 kg; lognormal variance with pedigree 0.2007, pedigree (2,1,4,3,1)
- Carbon dioxide, non-fossil [air, urban air close to ground]: 91.0531 kg; lognormal variance with pedigree 0.0257, pedigree (2,1,4,3,1)
- Carbon monoxide, non-fossil [air, urban air close to ground]: 0.2808 kg; lognormal variance with pedigree 0.2007, pedigree (2,1,4,3,1)
- Chlorine [air, urban air close to ground]: 0.00016848 kg; lognormal variance with pedigree 0.2007, pedigree (2,1,4,3,1)
- Chromium III [air, urban air close to ground]: 3.70656e-6 kg; lognormal variance with pedigree 0.8007, pedigree (2,1,4,3,1)
- Chromium VI [air, urban air close to ground]: 3.744e-8 kg; lognormal variance with pedigree 0.8007, pedigree (2,1,4,3,1)
- Copper ion [air, urban air close to ground]: 2.0592e-5 kg; lognormal variance with pedigree 0.2007, pedigree (2,1,4,3,1)
- Dinitrogen monoxide [air, urban air close to ground]: 0.0021528 kg; lognormal variance with pedigree 0.2007, pedigree (2,1,4,3,1)
- Dioxins, measured as 2,3,7,8-tetrachlorodibenzo-p-dioxin [air, urban air close to ground]: 2.9016e-11 kg; lognormal variance with pedigree 0.5507, pedigree (2,1,4,3,1)
- Fluorine [air, urban air close to ground]: 4.68e-5 kg; lognormal variance with pedigree 0.2007, pedigree (2,1,4,3,1)
- Formaldehyde [air, urban air close to ground]: 0.00012168 kg; lognormal variance with pedigree 0.2007, pedigree (2,1,4,3,1)
- Hydrocarbons, aliphatic, alkanes, unspecified [air, urban air close to ground]: 0.00085176 kg; lognormal variance with pedigree 0.2007, pedigree (2,1,4,3,1)
- Hydrocarbons, aliphatic, unsaturated [air, urban air close to ground]: 0.0029016 kg; lognormal variance with pedigree 0.2007, pedigree (2,1,4,3,1)
- Lead II [air, urban air close to ground]: 2.34e-5 kg; lognormal variance with pedigree 0.8007, pedigree (2,1,4,3,1)
- Magnesium [air, urban air close to ground]: 0.00033696 kg; lognormal variance with pedigree 0.2007, pedigree (2,1,4,3,1)
- Manganese II [air, urban air close to ground]: 0.00015912 kg; lognormal variance with pedigree 0.2007, pedigree (2,1,4,3,1)
- Mercury II [air, urban air close to ground]: 2.808e-7 kg; lognormal variance with pedigree 0.8007, pedigree (2,1,4,3,1)
- Methane, non-fossil [air, urban air close to ground]: 0.0003744 kg; lognormal variance with pedigree 0.2007, pedigree (2,1,4,3,1)
- NMVOC, non-methane volatile organic compounds [air, urban air close to ground]: 0.009828 kg; lognormal variance with pedigree 0.2007, pedigree (2,1,4,3,1)
- Nickel II [air, urban air close to ground]: 5.616e-6 kg; lognormal variance with pedigree 0.8007, pedigree (2,1,4,3,1)
- Nitrogen oxides [air, urban air close to ground]: 0.16848 kg; lognormal variance with pedigree 0.2007, pedigree (2,1,4,3,1)
- PAH, polycyclic aromatic hydrocarbons [air, urban air close to ground]: 1.03896e-5 kg; lognormal variance with pedigree 0.5507, pedigree (2,1,4,3,1)
- Particulate Matter, < 2.5 um [air, urban air close to ground]: 0.08424 kg; lognormal variance with pedigree 0.5507, pedigree (2,1,4,3,1)
- Particulate Matter, > 2.5 um and < 10um [air, unspecified]: 0.00468 kg; lognormal variance with pedigree 0.3507, pedigree (2,1,4,3,1)
- Phenol, pentachloro- [air, urban air close to ground]: 7.5816e-9 kg; lognormal variance with pedigree 0.3507, pedigree (2,1,4,3,1)
- Phosphorus [air, urban air close to ground]: 0.0002808 kg; lognormal variance with pedigree 0.2007, pedigree (2,1,4,3,1)
- Potassium I [air, urban air close to ground]: 0.0219024 kg; lognormal variance with pedigree 0.2007, pedigree (2,1,4,3,1)
- Sodium [air, urban air close to ground]: 0.0012168 kg; lognormal variance with pedigree 0.2007, pedigree (2,1,4,3,1)
- Sulfur dioxide [air, urban air close to ground]: 0.00234 kg; lognormal variance with pedigree 0.0257, pedigree (2,1,4,3,1)
- Toluene [air, urban air close to ground]: 0.0002808 kg; lognormal variance with pedigree 0.3507, pedigree (2,1,4,3,1)
- Water [air, unspecified]: 0.252369 m3; lognormal variance with pedigree 0.2001, pedigree (1,1,4,3,1)
- Zinc II [air, urban air close to ground]: 0.0002808 kg; lognormal variance with pedigree 0.8007, pedigree (2,1,4,3,1)
- m-Xylene [air, urban air close to ground]: 0.00011232 kg; lognormal variance with pedigree 0.3507, pedigree (2,1,4,3,1)

## Sampling procedure
complementary literature and sampling from sawmills; CH data used to approximate European processes
