# alfalfa/grass silage production

Dataset: EcoSpold 2, unit process
Geography: RoW
Time period: 2010-01-01 to 2022-12-31
Technology level: current
Classification: ISIC rev.4 ecoinvent: 0119:Growing of other non-perennial crops
Synonyms: Thimothy/alfalfa haylage; Thimothy/red clover haylage
Scenario: Business-as-Usual
System model: Substitution, consequential, long-term
Generated by: Dominique Maxime
Database: ecoinvent
isCopyrightProtected: true
accessRestrictedTo: 1

## General comment
This dataset represents the production of 1 kg dry matter of alfalfa/grass silage (haylage). It has been extrapolated from an original dataset covering the geography Québec (Canada). Informations about the Québec dataset are as follows:
The 2010-2012 average yield is 12568 kg/ha (wet mass) at an average moisture content of 54%, i.e. 5780 kg dm/ha. The production considered is an average of intensive production of thimothy/alfalfa (30%) and thimothy/red clover (70%) haylage in silo and large round bales bales. The crop rotation is 5 years.

## Included activities start
This activity starts with soil cultivation after the harvest of the previous crop.

## Included activities end
This activity ends after harvest and storage at the farm gate.
The dataset includes the inputs of seeds, mineral and organic fertilisers, pesticides and all machine operations and corresponding machine infrastructure and sheds. Machine operations are: soil cultivation, transport of seeds, fertilisers and pesticides to the field (15 km), sowing, fertilisation, weed control, pest and pathogen control, haying, baling and loading, or bulk loading for hay ensiled into silo, then transport to farm and discharge. Direct field emissions are also included. Use of car, van, or pick-up for servicing people (e.g. from farm to field) is excluded from the activities. Note that there might be irrigation involved at the GLO scale, but no data were specifically collected for the dataset since it is extrapolated from the QC-CA geography where no irrigation is applied.

## Geography
This dataset has been copied from an original dataset covering the geography Québec. The uncertainty has been adjusted accordingly.

## Time period
Time of publications

## Parameters
- fraction, process water to water, to surface water: 0.2 dimensionless; name fraction_PWtoW_to_surface_water; lognormal variance with pedigree 0.0886, pedigree (4,3,1,1,4)
  For agricultural crop dataset, distinction is made between irrigation water and process water. Process water is the water that comes with manure or pesticide application. A fraction of the process water input evaporates to the air and the remaining is considered emitted to surface water and ground water.
  By default, the same value as for irrigation is assumed: this is a global value similar to the one used in ecoinvent 3 GLO crop datasets.
- fraction, process water, to air: 0.58699 dimensionless; name fraction_PW_to_air; lognormal variance with pedigree 0.0409, pedigree (2,2,2,1,1)
  (same comment as for fraction, process water to water, to surface water)
- water content at harvest: 0.54 kg/kg; name harvest_wc; lognormal variance with pedigree 0.012, pedigree (1,1,1,5,1)
  Material water content at harvest (wet mass basis). See supporting documentation '01 crop production - Québec.pdf' available on ecoinvent reports web page (https://ecoquery.ecoinvent.org/File/Reports).
- yield, agriculture: 12.568 metric ton/ha; name yield_agriculture; lognormal variance with pedigree 0.0101, pedigree (1,2,1,5,1)
  Amount (metric ton wet mass) of harvested and ensiled material per hectare of cultivated land. See supporting documentation '01 crop production - Québec.pdf' available on ecoinvent reports web page (https://ecoquery.ecoinvent.org/File/Reports).

## Reference product
- alfalfa-grass silage: 1 kg; By-product classification allocatable product; CPC 01912: Alfalfa for forage and silage
  production volume 2.70702e11 kg
  properties: carbon allocation 0.484 kg, carbon content 0.484, carbon content, fossil 0, carbon content, non-fossil 0.484, dry mass 1 kg, energy content 18.55 MJ, price 0.13 EUR2005, water content 1.17391, water in wet mass 1.17391 kg, wet mass 2.17391 kg

## Inputs from technosphere
- ammonia, anhydrous, liquid: 1.04999e-6, 2.21709e-5, 5.16069e-6, 1.0018e-5, 0.000111043, 4.69384e-6, 3.8589e-5 kg (7 suppliers, which the file names only by identifier); sum of these 0.000192725 kg; lognormal variance with pedigree 0.0039, pedigree (2,2,4,5,2)
  properties: dry mass 1 kg, wet mass 1 kg
- ammonium nitrate: 0.00148755, 0.00043896, 0.000820508 kg (3 suppliers, which the file names only by identifier); sum of these 0.00274702 kg; lognormal variance with pedigree 0.0039, pedigree (2,2,4,5,2)
  properties: dry mass 1 kg, wet mass 1 kg
- ammonium sulfate: 5.04263e-5, 8.38167e-5 kg (2 suppliers, which the file names only by identifier); sum of these 0.000134243 kg; lognormal variance with pedigree 0.0039, pedigree (2,2,4,5,2)
  properties: dry mass 1 kg, wet mass 1 kg
- application of plant protection product, by field sprayer: 1.62594e-5 ha; lognormal variance with pedigree 0.0039, pedigree (2,2,4,5,2)
- bale loading: 0.0039426 unit; lognormal variance with pedigree 0.0039, pedigree (2,2,4,5,2)
- baling: 0.0030851 unit; lognormal variance with pedigree 0.0039, pedigree (2,2,4,5,2)
- borax, anhydrous, powder: 0.00019931 kg; lognormal variance with pedigree 0.0039, pedigree (2,2,4,5,2)
  properties: dry mass 1 kg, wet mass 1 kg
- clover seed, Swiss integrated production, for sowing: 0.00051561 kg; lognormal variance with pedigree 0.0039, pedigree (2,2,4,5,2)
  properties: carbon content, non-fossil 0.469421, dry mass 0.9 kg, water content 0.111111, wet mass 1 kg
- fertilising, by broadcaster: 0.000172972 ha; lognormal variance with pedigree 0.0039, pedigree (2,2,4,5,2)
- fodder loading, by self-loading trailer: 0.0041401 m3; lognormal variance with pedigree 0.0039, pedigree (2,2,4,5,2)
- glyphosate: 4.4973e-6 kg; lognormal variance with pedigree 0.0035, pedigree (1,2,5,5,2)
  properties: carbon content, fossil 0.214286, dry mass 1 kg, wet mass 1 kg
- haying, by rotary tedder: 0.00048962 ha; lognormal variance with pedigree 0.0039, pedigree (2,2,4,5,2)
- inorganic nitrogen fertiliser, as N: 0.000184777, 7.30023e-8, 7.72626e-6, 1.82942e-6, 5.00556e-6, 4.9914e-6, 5.46973e-7, 2.18212e-5, 0.000140534, 4.77457e-6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 kg (28 suppliers, which the file names only by identifier); sum of these 0.00216969 kg; lognormal variance with pedigree 0.0039, pedigree (2,2,4,5,2)
  properties: dry mass 1 kg, wet mass 1 kg
- inorganic phosphorus fertiliser, as P2O5: 0.000142259, 2.68835e-5, 2.19514e-5, 2.68792e-7, 3.16066e-5, 1.0325e-6, 1.01544e-6, 7.21046e-6, 0.000215486, 0.00201478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 kg (28 suppliers, which the file names only by identifier); sum of these 0.00375349 kg; lognormal variance with pedigree 0.0039, pedigree (2,2,4,5,2)
  properties: dry mass 1 kg, wet mass 1 kg
- lime: 0.0306169, 0.00268024 kg (2 suppliers, which the file names only by identifier); sum of these 0.0332971 kg; lognormal variance with pedigree 0.0039, pedigree (2,2,4,5,2)
  properties: carbon content, fossil 0.120005, dry mass 1 kg, wet mass 1 kg
- liquid manure spreading, by vacuum tanker: 0.000281884 m3; lognormal variance with pedigree 0.0039, pedigree (2,2,4,5,2)
- manure, liquid, cattle: 0.12574 kg; lognormal variance with pedigree 0.0039, pedigree (2,2,4,5,2)
  properties: carbon content, non-fossil 0.68, dry mass 0.075 kg, nitrogen content 0.03681, water content 12.333, wet mass 1 kg
- manure, liquid, swine: 0.15615 kg; lognormal variance with pedigree 0.0039, pedigree (2,2,4,5,2)
  properties: carbon content, non-fossil 0.64, dry mass 0.05 kg, nitrogen content 0.1, water content 19, wet mass 1 kg
- manure, solid, cattle: 0.037307 kg; lognormal variance with pedigree 0.0039, pedigree (2,2,4,5,2)
  properties: carbon content, non-fossil 0.441, dry mass 0.22 kg, nitrogen content 0.02734, water content 3.5454, wet mass 1 kg
- packaging, for fertilisers: 0.119386 kg; lognormal variance with pedigree 0.0512, pedigree (4,3,4,5,4)
  properties: carbon content, fossil 0.825301, dry mass 1 kg, heating value, net 25.01 MJ, price 0.0642 EUR2005, wet mass 1 kg
- packaging, for pesticides: 0.000410036 kg; lognormal variance with pedigree 0.0512, pedigree (4,3,4,5,4)
  properties: carbon content, fossil 0.85714, dry mass 1 kg, heating value, net 25.97 MJ, price 0.0642 EUR2005, wet mass 1 kg
- pesticide, unspecified: 1.7297e-7 kg; lognormal variance with pedigree 0.0035, pedigree (1,2,5,5,2)
  properties: carbon content, fossil 0.486978, dry mass 1 kg, wet mass 1 kg
- phenoxy-compound: 1.0378e-6 kg; lognormal variance with pedigree 0.0035, pedigree (1,2,5,5,2)
  properties: carbon content, fossil 0.532559, dry mass 1 kg, wet mass 1 kg
- potassium chloride: 0.00188983, 0.0227876 kg (2 suppliers, which the file names only by identifier); sum of these 0.0246775 kg; lognormal variance with pedigree 0.0039, pedigree (2,2,4,5,2)
  properties: dry mass 1 kg, wet mass 1 kg
- potassium sulfate: 0.00047714, 0.00226505 kg (2 suppliers, which the file names only by identifier); sum of these 0.00274219 kg; lognormal variance with pedigree 0.0039, pedigree (2,2,4,5,2)
  properties: dry mass 1 kg, wet mass 1 kg
- poultry manure, fresh: 0.011397 kg; lognormal variance with pedigree 0.0039, pedigree (2,2,4,5,2)
  properties: carbon content, non-fossil 0.33389, dry mass 0.38 kg, nitrogen content 0.04044, water content 1.63158, wet mass 1 kg
- solid manure loading and spreading, by hydraulic loader and spreader: 0.0487038 kg; lognormal variance with pedigree 0.0039, pedigree (2,2,4,5,2)
- sowing: 3.8896e-5 ha; lognormal variance with pedigree 0.0039, pedigree (2,2,4,5,2)
- swath, by rotary windrower: 0.00039913 ha; lognormal variance with pedigree 0.0039, pedigree (2,2,4,5,2)
- tillage, ploughing: 3.3921e-5 ha; lognormal variance with pedigree 0.0039, pedigree (2,2,4,5,2)
- tillage, rotary cultivator: 5.048e-5 ha; lognormal variance with pedigree 0.0039, pedigree (2,2,4,5,2)
- transport, tractor and trailer, agricultural: 0.0216754, 8.81423e-5 metric ton*km (2 suppliers, which the file names only by identifier); sum of these 0.0217635 metric ton*km; lognormal variance with pedigree 0.1233, pedigree (2,2,4,5,2)
- urea: 0.00192263, 0.000352999, 0.00225151 kg (3 suppliers, which the file names only by identifier); sum of these 0.00452714 kg; lognormal variance with pedigree 0.0039, pedigree (2,2,4,5,2)
  properties: carbon content, fossil 0.2, dry mass 1 kg, wet mass 1 kg

## Inputs from nature
- Carbon dioxide, in air [natural resource, in air]: 1.77378 kg
- Energy, gross calorific value, in biomass [natural resource, biotic]: 17.897 MJ; lognormal variance with pedigree 0.1233, pedigree (3,3,4,3,5)
- Occupation, pasture, man made, intensive [natural resource, land]: 1.67207 m2*year; lognormal variance with pedigree 0, pedigree (1,1,4,1,1)
- Transformation, from pasture, man made, intensive [natural resource, land]: 1.72972 m2; lognormal variance with pedigree 0, pedigree (1,1,4,1,1)
- Transformation, to pasture, man made, intensive [natural resource, land]: 1.72972 m2; lognormal variance with pedigree 0, pedigree (1,1,4,1,1)

## Emissions to nature
- 2,4-DB [air, non-urban air or from high stacks]: 6.1751e-8 kg; lognormal variance with pedigree 0.042, pedigree (2,2,5,1,2)
- Ammonia [air, non-urban air or from high stacks]: 0.00119025 kg; lognormal variance with pedigree 0.0113, pedigree (2,2,4,5,2)
- Carbon dioxide, fossil [air, non-urban air or from high stacks]: 0.0179683 kg; lognormal variance with pedigree 0, pedigree (1,1,4,1,1)
- Dinitrogen monoxide [air, non-urban air or from high stacks]: 0.000728219 kg; lognormal variance with pedigree 0.0333, pedigree (2,2,4,5,2)
- Glyphosate [air, non-urban air or from high stacks]: 1.8439e-8 kg; lognormal variance with pedigree 0.0415, pedigree (2,2,5,1,2)
- Nitrogen oxides [air, non-urban air or from high stacks]: 0.000235752 kg; lognormal variance with pedigree 0.0113, pedigree (2,2,4,5,2)
- Water [air, non-urban air or from high stacks]: 0.000172429 m3
- 2,4-DB [soil, agricultural]: 9.5072e-7 kg; lognormal variance with pedigree 0.035, pedigree (2,2,5,1,2)
- Cadmium II [soil, agricultural]: -5.21361e-8 kg
- Chromium III [soil, agricultural]: 7.12933e-6 kg; lognormal variance with pedigree 0.0827, pedigree (5,2,4,5,2)
- Copper ion [soil, agricultural]: -6.13842e-6 kg
- Glyphosate [soil, agricultural]: 4.3749e-6 kg; lognormal variance with pedigree 0.0345, pedigree (2,2,5,1,2)
- Lead II [soil, agricultural]: -1.65402e-7 kg
- Nickel II [soil, agricultural]: -5.42682e-7 kg
- Pesticides, unspecified [soil, agricultural]: 1.7297e-7 kg; lognormal variance with pedigree 0.0345, pedigree (2,2,5,1,2)
- Zinc II [soil, agricultural]: -7.38047e-6 kg
- 2,4-DB [water, ground-]: 2.5254e-8 kg; lognormal variance with pedigree 0.042, pedigree (2,2,5,1,2)
- 2,4-DB [water, surface water]: 1.0413e-10 kg; lognormal variance with pedigree 0.042, pedigree (2,2,5,1,2)
- Cadmium II [water, surface water]: 5.47134e-8 kg; lognormal variance with pedigree 0.0827, pedigree (5,2,4,5,2)
- Chromium III [water, surface water]: 1.29456e-7 kg; lognormal variance with pedigree 0.0827, pedigree (5,2,4,5,2)
- Copper ion [water, surface water]: 1.05374e-6 kg; lognormal variance with pedigree 0.0827, pedigree (5,2,4,5,2)
- Glyphosate [water, ground-]: 1.0344e-7 kg; lognormal variance with pedigree 0.0415, pedigree (2,2,5,1,2)
- Glyphosate [water, surface water]: 4.5198e-10 kg; lognormal variance with pedigree 0.0415, pedigree (2,2,5,1,2)
- Lead II [water, surface water]: 2.4281e-7 kg; lognormal variance with pedigree 0.0827, pedigree (5,2,4,5,2)
- Nickel II [water, surface water]: 2.96354e-7 kg; lognormal variance with pedigree 0.0827, pedigree (5,2,4,5,2)
- Nitrate [water, ground-]: 0.0581082 kg; lognormal variance with pedigree 0.0413, pedigree (2,2,4,1,2)
- Phosphate [water, surface water]: 0.00013823 kg; lognormal variance with pedigree 0.041, pedigree (2,2,4,1,2)
- Phosphorus [water, surface water]: 2.506e-5 kg; lognormal variance with pedigree 0.0413, pedigree (2,2,4,1,2)
- Water [water, ground-]: 9.70578e-5 m3
- Water [water, surface water]: 2.42645e-5 m3
- Zinc II [water, surface water]: 1.25285e-6 kg; lognormal variance with pedigree 0.0827, pedigree (5,2,4,5,2)

## Sampling procedure
Literature and statistics data, opinions of experts in the field of agricultural production and agroeconomists.

## Extrapolations
This dataset has been extrapolated from an original dataset covering the geography of Quebec (Canada). The uncertainty has been adjusted accordingly. For information, details about the modelling extrapolations of the Quebec dataset are as follows:
Transports are modelled with standard distances. Machine usage is modelled with Québec diesel consumptions and field works (Beauregard, 2013) and Swiss machines. Mineral fertilizer types are extrapolated from overall mineral fertilizers sales in Québec (APNC 2011). Organic fertilizer types are extrapolated from animal manure supply data, per region in Québec, communicated by the Ministry of Agriculture (MAPAQ). Data about agricultural management practices are from BPR (2008. Suivi 2007 du Portrait agroenvironnemental des fermes du Que´bec). Emissions are calculated with standard methods according to ecoinvent documentation (Nemecek and Schnetzer, 2011. '01 crop production-direct field emissions natural resources' v1.2, August 2011, available at https://ecoquery.ecoinvent.org/File/Reports) and the World Food LCA Database guidelines (Nemecek et al. 2014, available at http://www.quantis-intl.com/microsites/wfldb/), except for : 1) pesticides emitted fractions (modelled using PestLCI 2.0, a global model, considering Québec average conditions for model input parameters, and considering that the degradation/uptake fraction calculated by PestLCI is actually emitted to soil - see the supporting documentation '01 crop production - Québec.pdf' for rationale), 2) phosphorus and phosphate emissions (modelled using ODEP, a Québec model, considering geospatialized weighted average conditions for soil, hydrology, and agricultural management practices), and 3) ammonia emissions from organic fertilizers which are calculated according to Québec conditions and agricultural management practices (coefficients are taken from Parent et Gagné (2010 and 2013 update). Furthermore, an IPCC Tier 2 approach is used for N2O emissions using regional and ecodistrict-based emission factors (Rochette et al., 2008). Due to lack of comprehensive data on pesticides use for Québec, data from a 2008 survey in the neighbouring province of Ontario are used (OMAFRA, 2008). Uncertainty in terms of the variance of the logtransformed data is the default value as provided by the Data Quality Guidelines for ecoinvent v3 (available at http://www.ecoinvent.org/support/documents-and-files/). Details on modelling and calculations are reported in the supporting documentation '01 crop production - Québec.pdf' available on ecoinvent reports web page (https://ecoquery.ecoinvent.org/File/Reports).
