# flat plate solar collector production, Cu absorber

Dataset: EcoSpold 2, unit process
Geography: RoW
Time period: 2001-01-01 to 2022-12-31
Technology level: current
Classification: EcoSpold01Categories: solar collector systems/production of components
Classification: ISIC rev.4 ecoinvent: 2815:Manufacture of ovens, furnaces and furnace burners
Tags: ConvertedDataset
Scenario: Business-as-Usual
System model: Substitution, consequential, long-term
Generated by: Niels Jungbluth
Published in: Jungbluth, N. 2007
Database: ecoinvent
isCopyrightProtected: true
accessRestrictedTo: 1

## General comment
The flat plate collector has selective black chrome coating on copper made in the US.
[This dataset was already contained in the ecoinvent database version 2. It was not individually updated during the transfer to ecoinvent version 3. Life Cycle Impact Assessment results may still have changed, as they are affected by changes in the supply chain, i.e. in other datasets. This dataset was generated following the ecoinvent quality guidelines for version 2. It may have been subject to central changes described in the ecoinvent version 3 change report (http://www.ecoinvent.org/database/ecoinvent-version-3/reports-of-changes/), and the results of the central updates were reviewed extensively. The changes added e.g. consistent water flows and other information throughout the database. The documentation of this dataset can be found in the ecoinvent reports of version 2, which are still available via the ecoinvent website. The change report linked above covers all central changes that were made during the conversion process.]

## Included activities end
Production and disposal of a flat plate collector in Switzerland. Including materials, water and energy use of production.

## Geography
Production in CH. Main components are imported from the US. The glass is coated in DK.

## Technology
Assembly of a flat plate collector. The collector has a copper sheet coated by black chrome coating.

## Time period
Material data have been investigated for a collector produced in 2002. Data for energy uses during production have been investigated for 2001.

## Parameters
- fraction, process water, to air: 0.15 dimensionless; lognormal variance with pedigree 0.092025, pedigree (4,4,3,2,4)
- fraction, tap water, to air: 0.15 dimensionless; lognormal variance with pedigree 0.092025, pedigree (4,4,3,2,4)
- fraction, water, completely softened, to air: 0.15 dimensionless; lognormal variance with pedigree 0.092025, pedigree (4,4,3,2,4)

## Reference product
- flat plate solar collector, Cu absorber: 1 m2; By-product classification allocatable product; CPC 43430: Parts for the goods of subclasses 43410 and 43420; parts of non-electric bakery ovens
  production volume 3.96633 m2
  properties: carbon allocation 0 kg, carbon content 0, price 1686 EUR2005

## Inputs from technosphere
- aluminium, wrought alloy: 3.93 kg; lognormal variance with pedigree 0.0206, pedigree (2,5,5,5,1)
  properties: dry mass 1 kg, wet mass 1 kg
- anti-reflex-coating, etching, solar glass: 1 m2; lognormal variance with pedigree 0.0206, pedigree (2,5,5,5,1)
- brazing solder, cadmium free: 0.00368 kg; lognormal variance with pedigree 0.0206, pedigree (2,5,5,5,1)
  properties: dry mass 1 kg, wet mass 1 kg
- copper, cathode: 2.82 kg; lognormal variance with pedigree 0.0206, pedigree (2,5,5,5,1)
  properties: dry mass 1 kg, wet mass 1 kg
- corrugated board box: 2.54341, 0.0408178, 1.09578 kg (3 suppliers, which the file names only by identifier); sum of these 3.68 kg; lognormal variance with pedigree 0.018, pedigree (3,4,5,5,1)
  properties: carbon content, fossil 0.000656085, carbon content, non-fossil 0.432275, dry mass 0.945 kg, heating value, net 12.86 MJ, water content 0.0582011, wet mass 1 kg
- electricity, medium voltage: 0.099274, 0.0183833, 0.00371435, 0.0471921, 0.0998977, 0.819076, 0.0687759, 0.00368635 kWh (8 suppliers, which the file names only by identifier); sum of these 1.16 kWh; lognormal variance with pedigree 0.0386, pedigree (2,5,5,5,3)
- heat carrier liquid, 40% C3H8O2: -0.00239 m3; lognormal variance with pedigree 0.0206, pedigree (2,5,1,5,1)
  properties: carbon content, fossil 3, dry mass 6.31366 kg, price 1.08656 EUR2005, water content 157.387, wet mass 1000 kg
- propylene glycol, liquid: 1.01 kg; lognormal variance with pedigree 0.0206, pedigree (2,5,5,5,1)
  properties: carbon content, fossil 0.473684, dry mass 1 kg, heating value, net 27.09 MJ, wet mass 1 kg
- selective coat, copper sheet, black chrome: 1 m2; lognormal variance with pedigree 0.0206, pedigree (2,5,5,5,1)
- sheet rolling, copper: 2.82 kg; lognormal variance with pedigree 0.0206, pedigree (2,5,5,5,1)
- silicone product: 0.0588 kg; lognormal variance with pedigree 0.0206, pedigree (2,5,5,5,1)
  properties: carbon content, fossil 0.324324, dry mass 1 kg, heating value, net 9.83 MJ, wet mass 1 kg
- soft solder, Sn97Cu3: 0.0588 kg; lognormal variance with pedigree 0.0206, pedigree (2,5,5,5,1)
  properties: dry mass 1 kg, wet mass 1 kg
- solar collector factory: 2e-7 unit; lognormal variance with pedigree 0.3286, pedigree (2,5,5,5,3)
- solar glass, low-iron: 9.12 kg; lognormal variance with pedigree 0.0206, pedigree (2,5,5,5,1)
  properties: dry mass 1 kg, wet mass 1 kg
- steel, chromium steel 18/8, hot rolled: 4.14 kg; lognormal variance with pedigree 0.0206, pedigree (2,5,5,5,1)
  properties: carbon content, fossil 0.0008, dry mass 1 kg, wet mass 1 kg
- stone wool, packed: 2.43 kg; lognormal variance with pedigree 0.0206, pedigree (2,5,5,5,1)
  properties: carbon content, fossil 0.015401, dry mass 1 kg, wet mass 1 kg
- synthetic rubber: 0.732 kg; lognormal variance with pedigree 0.0206, pedigree (2,5,5,5,1)
  properties: carbon content, fossil 0.871949, dry mass 1 kg, heating value, net 26.42 MJ, wet mass 1 kg
- tap water: 0.376061, 1.13179, 0.132207, 1.01308, 0.201538, 1.45993, 0.00338963, 5.082 kg (8 suppliers, which the file names only by identifier); sum of these 9.4 kg; lognormal variance with pedigree 0.0386, pedigree (2,5,5,5,3)
  properties: carbon content, fossil 0.00178991, dry mass 0.000337476 kg, water content 2962.17, wet mass 1 kg
- waste glass sheet: -1.87911, -7.24089 kg (2 suppliers, which the file names only by identifier); sum of these -9.12 kg; lognormal variance with pedigree 0.022, pedigree (3,5,1,5,1)
  properties: dry mass 1 kg, wet mass 1 kg
- waste mineral wool: -0.706685, -1.72331 kg (2 suppliers, which the file names only by identifier); sum of these -2.43 kg; lognormal variance with pedigree 0.022, pedigree (3,5,1,5,1)
  properties: dry mass 1 kg, wet mass 1 kg
- waste paperboard, unsorted: -1.03871, -2.64129 kg (2 suppliers, which the file names only by identifier); sum of these -3.68 kg; lognormal variance with pedigree 0.022, pedigree (3,5,1,5,1)
  properties: carbon content, non-fossil 0.483259, dry mass 0.804 kg, heating value, net 15.92 MJ, price 0.03924 EUR2005, water content 0.243781, wet mass 1 kg
- waste plastic, mixture: -0.0878811, -0.615216, -0.00230304, -0.00242529, -0.0748788, -0.00044408, -0.00587187, -0.000979791 kg (8 suppliers, which the file names only by identifier); sum of these -0.79 kg; lognormal variance with pedigree 0.022, pedigree (3,5,1,5,1)
  properties: carbon content, fossil 0.747344, dry mass 0.847 kg, heating value, net 30.79 MJ, water content 0.180638, wet mass 1 kg
- wastewater, average: -0.00180878, -0.00756429, -2.69318e-5 m3 (3 suppliers, which the file names only by identifier); sum of these -0.0094 m3; lognormal variance with pedigree 0.0206, pedigree (2,5,1,5,1)
  properties: carbon content, non-fossil 0.194039, dry mass 0.346837 kg, mass concentration, TOC 0.1091 kg/m3, mass concentration, calcium 0.039453 kg/m3, mass concentration, chlorine 0.030031 kg/m3, mass concentration, hydrogen 0.013365 kg/m3, mass concentration, nitrogen 0.031015 kg/m3, mass concentration, oxygen 0.069824 kg/m3, mass concentration, sodium 0.06456 kg/m3, mass concentration, sulfur 0.015602 kg/m3, water content 2882.2, wet mass 1000 kg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
- water, completely softened: 0.590776, 0.789224 kg (2 suppliers, which the file names only by identifier); sum of these 1.38 kg; lognormal variance with pedigree 0.0206, pedigree (2,5,5,5,1)
  properties: wet mass 1 kg

## Emissions to nature
- Water [air, unspecified]: 0.001617 m3; lognormal variance with pedigree 0.0427, pedigree (2,2,5,5,1)

## Sampling procedure
Questionnaires.

## Extrapolations
Energy uses during production investigated in an other factory. This dataset has been copied from an original dataset covering the geography CH. The uncertainty has been adjusted accordingly.

## Review by Sebastiano Meier 2003-07-07
Passed.
