# hydropower plant construction, run-of-river

Dataset: EcoSpold 2, unit process
Geography: CH
Time period: 1945-01-01 to 2022-12-31
Technology level: current
Classification: EcoSpold01Categories: hydro power/production of components
Classification: ISIC rev.4 ecoinvent: 4220:Construction of utility projects
Scenario: Business-as-Usual
System model: Substitution, consequential, long-term
Generated by: Christian Bauer
Published in: Bolliger, R. 2007
Database: ecoinvent
isCopyrightProtected: true
accessRestrictedTo: 1

## General comment
This dataset represents a run-of-river power plant unit. For this, a representative sample of various types of power plants in Switzerland and Austria is taken into account. The calculations are based on the information and data of the following run-of-river power plants: Rupperswil-Auenstein (Baumann 1949), Wildegg-Brugg (NOK 1956), Birsfelden (Aegerter et al. 1954), Donaukraftwerk Greifenstein (Brux 1983; max. Leistung 237 MW) and Rheinkraftwerk Albbruck-Dogern (Radag 1979) as well as the new construction of the power plant Ruppoldingen. The determined specific data was then related to the entire power plant park of Switzerland with an annual net electricity output of 15484 GWh/a (BEW 2001a). Lifetime is assumed to be 80 years for the structural part (including cement, reinforcing steel, diesel, electricity, transportation and explosives) and 40 years for the rest of materials. The data refers to plant construction of a mix of types of dams built between 1945 and the beginning of the 1980s; therefore they might not be representative for more modern construction, for an individual type and for small-scale and smallest-scale plants.

## Included activities start
From reception of the various construction materials (cement, reinforcing steel, chromium steel, low-alloyed steel, explosives, gravel) for the construction of a run-of-river hydro power plant.

## Included activities end
This activity ends with a run-of-river hydro power plant, with a lifetime of 80 years (structural part) resp. 40 years (all remaining parts). The dataset includes particle emissions during the construction activities. Transformers are included, while further infrastructure like outdoor substations, high-voltage lines, etc. are excluded. The dataset doesn't include the flue ash input, although flue ash is used as concrete additive. Due to the lack of information or insignificant amounts, copper consumption in generators, the need for landfill capacity for the excavated materials of adits and the recycling potential of materials after expiration of the life time are not taken into account.

## Geography
Data represent the average of a characteristic sample of Swiss run-of-river hydropower plants.

## Technology
Run-of-river power plants are hydro power plants without important reservoirs. Depending on the net head of the power plant, high-pressure, medium-pressure and low-pressure systems can be distinguished. Low-pressure power plants including river power stations and canal power plants are very common; therefore these two types of run-of-river power stations are covered in the dataset. To some extent, high-pressure as well as medium-pressure run-of-river systems can be considered as reservoir power stations, e.g. as unit in plant groups that are dominated by storage power plants, but also include alpine run power stations.
The technology used in the dataset has an overall efficiency of 82%, more modern technologies show an overall efficiency of about 88%. The overall efficiency (current: 0,82; modern: 0,88) is composed of the efficiency of the works water channel (current: 1,00; modern: 1,00), the turbine (current: 0,87; modern: 0,91), the generator (current: 0,96; modern: 0,98) and the transformer (current: 0,98; modern: 0,99). For the calculation of the works water channel of run-of-river plants an efficiency of 100% is assumed.
The efficiency losses in turbines depend on the turbine type (Kaplan, Francis, Pelton, etc.), the turbine output and on the ratio between turbined water amount and the rated water amount. In König, examples for curve progressions of the relationship between these variables are shown. For current power plants an efficiency of 87% is assumed, more modern turbines show an efficiency of about 91%.
The efficiency of generators depends on the output, the rotation speed of the generator and the cooling system. For today’s power plants an efficiency of approximately 96% is assumed, modern generators show an efficiency of about 98%. The efficiency of transformers amounts to 98%, respectively 99%.
References:
König F., von (1985) Bau von Wasserkraftanlagen. C.F. Müller, Karlsruhe.

## Parameters
- fraction, process water, to air: 0.15 dimensionless; name fraction_PW_to_air; lognormal variance with pedigree 0.092025, pedigree (4,4,3,2,4)
  Literature value. In case when no industry/process specific data are available, default evaporation fraction value is used. This value is 15% and is based on literature (Statistics Canada, 2007 & Shaffer, K.H., 2008, Consumptive water use in the Great Lakes Basin, USGS & Shiklomanov, 2003, World Water Resources at the Beginning of the 21st Century) and has been approved by an expert.
- fraction, tap water, to air: 0.15 dimensionless; name fraction_TW_to_air; = fraction_PW_to_air; lognormal variance with pedigree 0.092025, pedigree (4,4,3,2,4)
  Calculated value. See comment in the other parametres present in this dataset. Tap water is considered to be always used as process water, thus process water fractions to air are applied to all tap water input flows to calculate the amount of water consumed in the processes.

## Reference product
- hydropower plant, run-of-river: 1 unit; By-product classification allocatable product; CPC 53262: Power plants
  production volume 0.0154341 unit
  properties: carbon allocation 0 kg, carbon content 0, price 2.79622e10 EUR2005

## Inputs from technosphere
- cement, Portland: 2.32e9 kg; lognormal variance with pedigree 0.09, pedigree (1,1,5,1,1)
  properties: dry mass 1 kg, wet mass 1 kg
- diesel, burned in building machine: 5.82e9 MJ; lognormal variance with pedigree 0.1, pedigree (1,1,5,1,1)
  properties: heating value, net 1 MJ
- electricity, medium voltage: 6.18e8 kWh; lognormal variance with pedigree 0.09, pedigree (1,1,5,1,1)
- explosive, tovex: 779000 kg; lognormal variance with pedigree 0.06, pedigree (1,1,5,1,1)
  properties: carbon content, fossil 0.0483756, dry mass 0.92 kg, water content 0.0869565, wet mass 1 kg
- gravel, round: 1.97e10 kg; lognormal variance with pedigree 0.09, pedigree (1,1,5,1,1)
  properties: dry mass 1 kg, wet mass 1 kg
- reinforcing steel: 1.9e8 kg; lognormal variance with pedigree 0.07, pedigree (1,1,5,1,1)
  properties: carbon content, fossil 0.004, dry mass 1 kg, wet mass 1 kg
- steel, chromium steel 18/8, hot rolled: 3.72e7 kg; lognormal variance with pedigree 0.14, pedigree (1,1,5,1,1)
  properties: carbon content, fossil 0.0008, dry mass 1 kg, wet mass 1 kg
- steel, low-alloyed, hot rolled: 5.11e8 kg; lognormal variance with pedigree 0.07, pedigree (1,1,5,1,1)
  properties: carbon content, fossil 0.005, dry mass 1 kg, wet mass 1 kg
- tap water: 1.16e9 kg; lognormal variance with pedigree 0.09, pedigree (1,1,5,1,1)
  properties: carbon content, fossil 0.00178991, dry mass 0.000337476 kg, water content 2962.17, wet mass 1 kg
- waste reinforced concrete: -2.34e10 kg; lognormal variance with pedigree 0.09, pedigree (1,1,1,1,1)
  properties: dry mass 0.99418 kg, water content 0.00585407, wet mass 1 kg

## Emissions to nature
- Particulate Matter, < 2.5 um [air, non-urban air or from high stacks]: 2.32e6 kg; lognormal variance with pedigree 0.3, pedigree (1,1,5,1,1)
- Particulate Matter, > 10 um [air, non-urban air or from high stacks]: 3.08e7 kg; lognormal variance with pedigree 0.3, pedigree (1,1,5,1,1)
- Particulate Matter, > 2.5 um and < 10um [air, non-urban air or from high stacks]: 1.12e7 kg; lognormal variance with pedigree 0.3, pedigree (1,1,5,1,1)
- Water [air, unspecified]: 174000 m3; lognormal variance with pedigree 0.0407, pedigree (2,2,5,1,1)
- Water [water, unspecified]: 986000 m3; lognormal variance with pedigree 0.0407, pedigree (2,2,5,1,1)

## Sampling procedure
Sampling procedure based on literature. Some information regarding the results is given without source notes or detailed, comprehensible derivation due to the guaranteed confidential treatment of data.

## Review by Christian Bauer 2009-02-24
Passed.

## Review by Roland Hischier 2011-09-23
Transfer of documentation done.
