# 1,1-difluoroethane production, HFC-152a

Dataset: EcoSpold 2, unit process
Geography: RoW
Time period: 2005-01-01 to 2022-12-31
Technology level: current
Classification: EcoSpold01Categories: chemicals/organics
Classification: ISIC rev.4 ecoinvent: 2011:Manufacture of basic chemicals
Synonyms: R152a; 1,1-Difluoroethylene
Tags: ConvertedDataset
Scenario: Business-as-Usual
System model: Substitution, consequential, long-term
Share of production covered: 50 %
Generated by: Niels Jungbluth
Published in: Jungbluth, N. 2007
Database: ecoinvent
isCopyrightProtected: true
accessRestrictedTo: 1

## General comment
Basic inventory based on cumulative data.
[This dataset was already contained in the ecoinvent database version 2. It was not individually updated during the transfer to ecoinvent version 3. Life Cycle Impact Assessment results may still have changed, as they are affected by changes in the supply chain, i.e. in other datasets. This dataset was generated following the ecoinvent quality guidelines for version 2. It may have been subject to central changes described in the ecoinvent version 3 change report (http://www.ecoinvent.org/database/ecoinvent-version-3/reports-of-changes/), and the results of the central updates were reviewed extensively. The changes added e.g. consistent water flows and other information throughout the database. The documentation of this dataset can be found in the ecoinvent reports of version 2, which are still available via the ecoinvent website. The change report linked above covers all central changes that were made during the conversion process.]

## Included activities end
Pre-products, energy use, infrastructure, some air emissions and transports. No full information on all air and water emissions available.

## Geography
Production plant of DuPont in the United States.

## Technology
Fluoropolymer chemistry.

## Time period
Time of publications.

## Reference product
- 1,1-difluoroethane, HFC-152a: 1 kg; By-product classification allocatable product; CPC 341: Basic organic chemicals
  production volume 5e6 kg
  properties: carbon allocation 0.363636 kg, carbon content 0.363636, carbon content, fossil 0.363636, carbon content, non-fossil 0, dry mass 1 kg, heating value, net 18.36 MJ, price 1.9 EUR2005, water content 0, water in wet mass 0 kg, wet mass 1 kg

## Inputs from technosphere
- acetylene: 0.352975, 0.0743554 kg (2 suppliers, which the file names only by identifier); sum of these 0.42733 kg; lognormal variance with pedigree 0.0826, pedigree (5,3,5,5,1)
  properties: carbon content, fossil 0.923077, dry mass 1 kg, heating value, net 51.2 MJ, wet mass 1 kg
- chemical factory, organics: 4e-10 unit; lognormal variance with pedigree 0.3826, pedigree (5,3,5,5,1)
- electricity, medium voltage: 0.0975705, 0.0180678, 0.00365061, 0.0463823, 0.805021, 0.00362309, 0.014939, 0.0996455 kWh (8 suppliers, which the file names only by identifier); sum of these 1.0889 kWh; lognormal variance with pedigree 0.0826, pedigree (5,3,5,5,1)
- heat, district or industrial, natural gas: 0.931 MJ; lognormal variance with pedigree 0.0826, pedigree (5,3,5,5,1)
  properties: heating value, net 1 MJ
- hydrogen fluoride: 0.163331, 0.473659 kg (2 suppliers, which the file names only by identifier); sum of these 0.63699 kg; lognormal variance with pedigree 0.0826, pedigree (5,3,5,5,1)
  properties: dry mass 1 kg, heating value, net 6.06 MJ, wet mass 1 kg
- lime, hydrated, packed: 0.000180012, 0.021207 kg (2 suppliers, which the file names only by identifier); sum of these 0.021387 kg; lognormal variance with pedigree 0.0826, pedigree (5,3,5,5,1)
  properties: dry mass 0.997 kg, water content 0.00300903, wet mass 1 kg
- zinc: 0.0019676 kg; lognormal variance with pedigree 0.0826, pedigree (5,3,5,5,1)
  properties: dry mass 1 kg, wet mass 1 kg

## Emissions to nature
- Ethane, 1,1-difluoro-, HFC-152a [air, urban air close to ground]: 0.013583 kg; lognormal variance with pedigree 0.1226, pedigree (5,3,5,5,1)

## Sampling procedure
Publication of cumulative data.

## Extrapolations
Desaggregation of published cumulative results for global warming potential and cumulative energy demand. This dataset has been copied from an original dataset covering the geography US. The uncertainty has been adjusted accordingly.

## Review by Roberto Dones 2007-09-13
Passed.
none
