# nuclear power plant construction, pressure water reactor, 1000MW

Dataset: EcoSpold 2, unit process
Geography: RoW
Time period: 1979-01-01 to 2022-12-31
Technology level: current
Classification: EcoSpold01Categories: nuclear power/power plants
Classification: ISIC rev.4 ecoinvent: 4220:Construction of utility projects
Tags: ConvertedDataset
Scenario: Business-as-Usual
System model: Substitution, consequential, long-term
Generated by: Roberto Dones
Published in: Dones, R. 2007
Database: ecoinvent
isCopyrightProtected: true
accessRestrictedTo: 1

## General comment
Estimation based on data of the power plant in Gösgen with a net installed capacity of 970 MW (constant capacity over 1996 - 2002). Material and energy data were extrapolated from the information available for the BWR in Leibstadt and used for the module "nuclear power plant, boiling water reactor", CH. Waste material inventory data for decommissioning of the power plant in Gösgen were available from the evaluation performed by the operators during the 1980s.
[This dataset was already contained in the ecoinvent database version 2. It was not individually updated during the transfer to ecoinvent version 3. Life Cycle Impact Assessment results may still have changed, as they are affected by changes in the supply chain, i.e. in other datasets. This dataset was generated following the ecoinvent quality guidelines for version 2. It may have been subject to central changes described in the ecoinvent version 3 change report (http://www.ecoinvent.org/database/ecoinvent-version-3/reports-of-changes/), and the results of the central updates were reviewed extensively. The changes added e.g. consistent water flows and other information throughout the database. The documentation of this dataset can be found in the ecoinvent reports of version 2, which are still available via the ecoinvent website. The change report linked above covers all central changes that were made during the conversion process.]

## Included activities end
The module includes materials, energy and transport requirements used for construction of the plant. Land-use is included with the assumption of 40 years operation. Disposal of non-contaminated material from dismantling is also included, whereas contaminated materials are attributed to the operation.

## Geography
Swiss data of one specific plant.

## Technology
The described plant Gösgen started commercial operation at the end of 1979. It belongs to the 1000 MW class. It has a Siemens designed primary circuit with three loop cooling, a spherical containment, and a cooling tower. This module can be assumed to be representative for other pressure water reactors of the same class in Western Europe.

## Reference product
- nuclear power plant, pressure water reactor, 1000MW: 1 unit; By-product classification allocatable product; CPC 53262: Power plants
  production volume 2.28384 unit
  properties: carbon allocation 0 kg, carbon content 0, price 1.32596e8 EUR2005

## Inputs from technosphere
- aluminium, cast alloy: 64000 kg; lognormal variance with pedigree 0.012, pedigree (1,1,5,5,1)
  properties: dry mass 1 kg, wet mass 1 kg
- aluminium, wrought alloy: 136000 kg; lognormal variance with pedigree 0.012, pedigree (1,1,5,5,1)
  properties: dry mass 1 kg, wet mass 1 kg
- concrete, normal strength: 4406.28, 459.129, 398.778, 298.638, 2090.8, 157629, 3716.97 m3 (7 suppliers, which the file names only by identifier); sum of these 169000 m3; lognormal variance with pedigree 0.002, pedigree (1,1,5,5,1)
  properties: dry mass 2190 kg, water content 0.086758, wet mass 2380 kg
- copper, cathode: 1.47e6 kg; lognormal variance with pedigree 0.002, pedigree (1,1,5,5,1)
  properties: dry mass 1 kg, wet mass 1 kg
- diesel, burned in building machine: 1.9e8 MJ; lognormal variance with pedigree 0.012, pedigree (1,1,5,5,1)
  properties: heating value, net 1 MJ
- electricity, medium voltage: 181540, 9.48475e6, 1.13618e6, 1.80241e7, 1.07708e7, 251686, 216889, 1.0337e6, 3.42644e6, 611072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 kWh (82 suppliers, which the file names only by identifier); sum of these 5.31e8 kWh; lognormal variance with pedigree 0.012, pedigree (1,1,5,5,1)
- excavation, hydraulic digger: 85000 m3; lognormal variance with pedigree 0.002, pedigree (1,1,5,5,1)
- fibre cement facing tile: 5.3e6 kg; lognormal variance with pedigree 0.002, pedigree (1,1,5,5,1)
  properties: carbon content, fossil 0.0201818, carbon content, non-fossil 0.0115, dry mass 1 kg, wet mass 1 kg
- heat, district or industrial, other than natural gas: 236805, 1.35613e8 MJ (2 suppliers, which the file names only by identifier); sum of these 1.3585e8 MJ; lognormal variance with pedigree 0.012, pedigree (1,1,5,5,1)
  properties: heating value, net 1 MJ
- inert waste, for final disposal: -3.22e8 kg; lognormal variance with pedigree 0.012, pedigree (1,1,1,5,1)
  properties: dry mass 0.995 kg, water content 0.00502513, wet mass 1 kg
- lubricating oil: 200000 kg; lognormal variance with pedigree 0.012, pedigree (1,1,5,5,1)
  properties: carbon content, fossil 0.75, dry mass 1 kg, heating value, net 40.2 MJ, wet mass 1 kg
- paper, woodfree, coated: 850000 kg; lognormal variance with pedigree 0.002, pedigree (1,1,5,5,1)
  properties: carbon content, fossil 0.0590617, carbon content, non-fossil 0.22775, dry mass 0.945 kg, heating value, net 14.11 MJ, water content 0.0582011, wet mass 1 kg
- plywood: 6720 m3; lognormal variance with pedigree 0.012, pedigree (1,1,5,5,1)
  properties: carbon content, fossil 0.09783, carbon content, non-fossil 0.409818, dry mass 768.6 kg, heating value, net 11688.9 MJ, price 400 EUR2005, water content 0.070778, wet mass 823 kg
- reinforcing steel: 3.37e7 kg; lognormal variance with pedigree 0.002, pedigree (1,1,5,5,1)
  properties: carbon content, fossil 0.004, dry mass 1 kg, wet mass 1 kg
- steel, chromium steel 18/8, hot rolled: 2.19e7 kg; lognormal variance with pedigree 0.002, pedigree (1,1,5,5,1)
  properties: carbon content, fossil 0.0008, dry mass 1 kg, wet mass 1 kg
- steel, low-alloyed, hot rolled: 5.57e6 kg; lognormal variance with pedigree 0.002, pedigree (1,1,5,5,1)
  properties: carbon content, fossil 0.005, dry mass 1 kg, wet mass 1 kg

## Inputs from nature
All rows: lognormal variance with pedigree 0.002, pedigree (1,1,5,5,1)
- Occupation, construction site [natural resource, land]: 2.25e6 m2*year
- Occupation, industrial area [natural resource, land]: 6e6 m2*year
- Transformation, from industrial area [natural resource, land]: 150000 m2
- Transformation, from pasture, man made [natural resource, land]: 84875 m2
- Transformation, from unspecified [natural resource, land]: 65125 m2
- Transformation, to industrial area [natural resource, land]: 150000 m2
- Transformation, to unspecified [natural resource, land]: 150000 m2

## Sampling procedure
Literature

## Extrapolations
none This dataset has been copied from an original dataset covering the geography CH. The uncertainty has been adjusted accordingly.

## Review by Roberto Dones 2003-08-19
passed
for final calculation August 2003
