# clay brick production

Dataset: EcoSpold 2, unit process
Geography: RoW
Time period: 1992-01-01 to 2022-12-31
Technology level: current
Classification: ISIC rev.4 ecoinvent: 2392:Manufacture of clay building materials
Classification: EcoSpold01Categories: construction materials/bricks
Synonyms: Ton; clay; Ziegel
Tags: ConvertedDataset
Scenario: Business-as-Usual
System model: Substitution, consequential, long-term
Generated by: Daniel Kellenberger (obsolete)
Published in: Kellenberger D. 2007
Database: ecoinvent
isCopyrightProtected: true
accessRestrictedTo: 1

## General comment
This dataset represents the production of 1 kg of brick. Data was obtained from literature values (average data from 12 Swiss brick plants) that were corrected and updated for some flows. Note that no hard coal coke is used within these 12 plants.
includes first ginding process, wet process (includes second ginding, mixing and plastifying), storage, forming (extruding molding method) and cutting, drying, firing, loading, packing and storage
not included: charge of the wastewater and solid waste, it's assumed that the waste heat is totally reused for drying, no hard coal coke is used within these 12 plants
Clay brick. Image source: http://nbss.co.za/wp-content/uploads/2015/06/clay-stock-bricks.jpg, accessed 20151211

## Included activities start
From reception of clay at the factory gate.

## Included activities end
This dataset ends with the storage of the produced and packed brick at the factory. This datset includes the first ginding process, wet process (second ginding, mixing and plastifying), storage, forming (an extruding molding method) and cutting, drying, firing, loading, packing and storage. The dataset doesn't include the charge of the wastewater and solid waste.

## Geography
Data was obtained from industries of Switzerland, Germany and Austria. certain exchanges are proxies (CH for RER), specially for the petrol consumption the proxy "operation, passenger car" has been used; data stem from Switzerland, Germany and Austria

## Technology
This dataset corresponds to a mix of different brick production technologies (different firing fuels) in Austria, Germany and Switzerland.

## Parameters
- fraction, process water, to air: 0.15 dimensionless; lognormal variance with pedigree 0.092025, pedigree (4,4,3,2,4)
- fraction, tap water, to air: 0.15 dimensionless; lognormal variance with pedigree 0.092025, pedigree (4,4,3,2,4)

## Reference product
- clay brick: 1 kg; By-product classification allocatable product; CPC 373: Refractory products and structural non-refractory clay products
  production volume 1.31556e10 kg
  properties: carbon allocation 0 kg, carbon content 0, carbon content, fossil 0, carbon content, non-fossil 0, dry mass 1 kg, price 0.083 EUR2005, water content 0, water in wet mass 0 kg, wet mass 1 kg

## Inputs from technosphere
- EUR-flat pallet: 1.61e-5 unit; lognormal variance with pedigree 0.102, pedigree (5,5,5,5,1)
  properties: carbon content, fossil 0.0311351, carbon content, non-fossil 0.58833, dry mass 18.3333 kg, heating value, net 335.11 MJ, water content 0.2, wet mass 22 kg
- clay: 1.35 kg; lognormal variance with pedigree 0.102, pedigree (5,5,5,5,1)
  properties: dry mass 0.965 kg, water content 0.0362694, wet mass 1 kg
- clay pit infrastructure: 2e-10 unit; lognormal variance with pedigree 0.41, pedigree (3,5,5,5,3)
- diesel, burned in building machine: 0.0297 MJ; lognormal variance with pedigree 0.102, pedigree (5,5,5,5,1)
  properties: heating value, net 1 MJ
- electricity, medium voltage: 0.00375475, 0.000140485, 0.0017849, 0.0309792, 0.00260125, 0.000139425 kWh (6 suppliers, which the file names only by identifier); sum of these 0.0394 kWh; lognormal variance with pedigree 0.102, pedigree (5,5,5,5,1)
- heavy fuel oil: 2.71754e-6, 1.4434e-5, 0.000337417, 1.8716e-5, 4.87576e-6, 2.83922e-6 kg (6 suppliers, which the file names only by identifier); sum of these 0.000381 kg; lognormal variance with pedigree 0.102, pedigree (5,5,5,5,1)
  properties: carbon content, fossil 0.849, dry mass 1 kg, heating value, net 41.2 MJ, wet mass 1 kg
- light fuel oil: 1.35426e-5, 9.39051e-5, 1.82229e-5, 0.000189523, 0.00508223, 1.25765e-5 kg (6 suppliers, which the file names only by identifier); sum of these 0.00541 kg; lognormal variance with pedigree 0.102, pedigree (5,5,5,5,1)
  properties: carbon content, fossil 0.862, dry mass 1 kg, heating value, net 42.6 MJ, wet mass 1 kg
- lime, packed: 0.0239 kg; lognormal variance with pedigree 0.102, pedigree (5,5,5,5,1)
  properties: carbon content, fossil 0.117492, dry mass 0.998 kg, water content 0.00200401, wet mass 1 kg
- limestone, crushed, for mill: 0.000394419, 1.58138e-6 kg (2 suppliers, which the file names only by identifier); sum of these 0.000396 kg; lognormal variance with pedigree 0.102, pedigree (5,5,5,5,1)
  properties: carbon content, fossil 0.117492, dry mass 0.998 kg, water content 0.00200401, wet mass 1 kg
- lubricating oil: 1.32e-5 kg; lognormal variance with pedigree 0.102, pedigree (5,5,5,5,1)
  properties: carbon content, fossil 0.75, dry mass 1 kg, heating value, net 40.2 MJ, wet mass 1 kg
- natural gas, high pressure: 0.00219561, 0.000454403, 0.000421227, 0.000118627, 0.000911821, 0.000261985, 0.000166882, 0.000182465, 0.000110585, 0.000130691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 m3 (24 suppliers, which the file names only by identifier); sum of these 0.0317949 m3; lognormal variance with pedigree 0.102, pedigree (5,5,5,5,1)
  properties: carbon content, fossil 0.602381, dry mass 0.84 kg, heating value, gross 39 MJ, heating value, net 36 MJ, wet mass 0.84 kg
- packaging film, low density polyethylene: 0.000542 kg; lognormal variance with pedigree 0.102, pedigree (5,5,5,5,1)
  properties: carbon content, fossil 0.857143, dry mass 1 kg, heating value, net 42.47 MJ, wet mass 1 kg
- polyethylene, high density, granulate: 8.58e-7 kg; lognormal variance with pedigree 0.102, pedigree (5,5,5,5,1)
  properties: carbon content, fossil 0.857143, dry mass 1 kg, heating value, net 42.47 MJ, wet mass 1 kg
- polystyrene, expandable: 0.000352 kg; lognormal variance with pedigree 0.102, pedigree (5,5,5,5,1)
  properties: carbon content, fossil 0.923077, dry mass 1 kg, heating value, net 38.67 MJ, wet mass 1 kg
- pulverised lignite: 0.0245 MJ; lognormal variance with pedigree 0.102, pedigree (5,5,5,5,1)
  properties: carbon content, fossil 0.660674, dry mass 0.0410138 kg, heating value, net 1 MJ, water content 0.123596, wet mass 0.0460829 kg
- sand: 1.15498e-6, 0.000222474, 0.0144764 kg (3 suppliers, which the file names only by identifier); sum of these 0.0147 kg; lognormal variance with pedigree 0.102, pedigree (5,5,5,5,1)
  properties: dry mass 1 kg, wet mass 1 kg
- sheet rolling, chromium steel: 1.57e-7 kg; lognormal variance with pedigree 0.102, pedigree (5,5,5,5,1)
- sheet rolling, steel: 1.57e-5 kg; lognormal variance with pedigree 0.102, pedigree (5,5,5,5,1)
- steel, low-alloyed, hot rolled: 3.06e-5 kg; lognormal variance with pedigree 0.102, pedigree (5,5,5,5,1)
  properties: carbon content, fossil 0.005, dry mass 1 kg, wet mass 1 kg
- tap water: 0.00123713, 0.000434923, 0.00333274, 0.000663003, 0.00480273, 1.11509e-5, 0.0167183 kg (7 suppliers, which the file names only by identifier); sum of these 0.0272 kg; lognormal variance with pedigree 0.102, pedigree (5,5,5,5,1)
  properties: carbon content, fossil 0.00178991, dry mass 0.000337476 kg, water content 2962.17, wet mass 1 kg
- transport, passenger car: 0.0166 km; lognormal variance with pedigree 0.102, pedigree (5,5,5,5,1)
- wood chips, dry, measured as dry mass: 0.008957 kg; lognormal variance with pedigree 0.102, pedigree (5,5,5,5,1)
  properties: carbon content, non-fossil 0.494, dry mass 1 kg, heating value, net 9.99 MJ, water content 0.4, wet mass 1.4 kg

## Inputs from nature
- Water, well, in ground [natural resource, in water]: 7.36e-5 m3; lognormal variance with pedigree 0.102, pedigree (5,5,5,5,1)

## Emissions to nature
- Benzene [air, unspecified]: 2.96e-6 kg; lognormal variance with pedigree 0.222, pedigree (5,5,5,5,1)
- Carbon dioxide, fossil [air, unspecified]: 0.18 kg; lognormal variance with pedigree 0.102, pedigree (5,5,5,5,1)
- Carbon monoxide, fossil [air, unspecified]: 0.000391 kg; lognormal variance with pedigree 0.102, pedigree (5,5,5,5,1)
- Formaldehyde [air, unspecified]: 1.64e-5 kg; lognormal variance with pedigree 0.222, pedigree (5,5,5,5,1)
- Hydrochloric acid [air, unspecified]: 1.22e-5 kg; lognormal variance with pedigree 0.142, pedigree (5,5,5,5,1)
- Hydrogen fluoride [air, unspecified]: 1.06e-5 kg; lognormal variance with pedigree 0.142, pedigree (5,5,5,5,1)
- NMVOC, non-methane volatile organic compounds [air, unspecified]: 7.63e-5 kg; lognormal variance with pedigree 0.222, pedigree (5,5,5,5,1)
- Nitrogen oxides [air, unspecified]: 0.00026 kg; lognormal variance with pedigree 0.142, pedigree (5,5,5,5,1)
- Particulate Matter, < 2.5 um [air, unspecified]: 1.4e-5 kg; lognormal variance with pedigree 0.402, pedigree (5,5,5,5,1)
- Particulate Matter, > 10 um [air, unspecified]: 4.68e-6 kg; lognormal variance with pedigree 0.142, pedigree (5,5,5,5,1)
- Phenol [air, unspecified]: 1.3e-7 kg; lognormal variance with pedigree 0.222, pedigree (5,5,5,5,1)
- Sulfur dioxide [air, unspecified]: 9.98e-5 kg; lognormal variance with pedigree 0.222, pedigree (5,5,5,5,1)
- Water [air, unspecified]: 1.512e-5 m3; lognormal variance with pedigree 0.0427, pedigree (2,2,5,5,1)
- Water [water, unspecified]: 8.568e-5 m3; lognormal variance with pedigree 0.0427, pedigree (2,2,5,5,1)

## Sampling procedure
The data relates to 12 brick production plants in Germany, Austria and Switzerland; The estimation of infrastructure relates to one company in Switzerland (Ziegelei Gasser AG in Rapperswil BE),

## Extrapolations
See geography This dataset has been copied from an original dataset covering the geography RER. The uncertainty has been adjusted accordingly.

## Review by Roberto Dones 2005-07-19
passed
