# pulp factory construction

Dataset: EcoSpold 2, unit process
Geography: RoW
Time period: 2000-01-01 to 2022-12-31
Technology level: current
Classification: ISIC rev.4 ecoinvent: 4290:Construction of other civil engineering projects
Classification: EcoSpold01Categories: paper & cardboard/graphic paper
Tags: ConvertedDataset
Scenario: Business-as-Usual
System model: Substitution, consequential, long-term
Generated by: Roland Hischier
Published in: Hischier R. 2007
Database: ecoinvent
isCopyrightProtected: true
accessRestrictedTo: 1

## General comment
The dataset represents a pulp mill with a annual production of 400 kt and a total life time of 50 years.
[This dataset was already contained in the ecoinvent database version 2. It was not individually updated during the transfer to ecoinvent version 3. Life Cycle Impact Assessment results may still have changed, as they are affected by changes in the supply chain, i.e. in other datasets. This dataset was generated following the ecoinvent quality guidelines for version 2. It may have been subject to central changes described in the ecoinvent version 3 change report (http://www.ecoinvent.org/database/ecoinvent-version-3/reports-of-changes/), and the results of the central updates were reviewed extensively. The changes added e.g. consistent water flows and other information throughout the database. The documentation of this dataset can be found in the ecoinvent reports of version 2, which are still available via the ecoinvent website. The change report linked above covers all central changes that were made during the conversion process.]

## Included activities end
this module includes the land-use, buildings (hall and multi-story) and streets within the mill area, machineries for pulp and energy production as well as the dismanteling/disposal of the whole infrastructure (without the paper machine)

## Geography
Land-use from 1 small European pulp mill, used here for whole Europe

## Technology
Typical European pulp mill

## Reference product
- pulp factory: 1 unit; By-product classification allocatable product; CPC 53269: Other constructions for manufacturing
  production volume 2.67763 unit
  properties: carbon allocation 0 kg, carbon content 0, price 1.01679e9 EUR2005

## Inputs from technosphere
- building, hall, steel construction: 327000 m2; lognormal variance with pedigree 0.48, pedigree (5,5,5,5,4)
- building, multi-storey: 192000 m3; lognormal variance with pedigree 0.48, pedigree (5,5,5,5,4)
- chemical factory: 1.12e7 kg; lognormal variance with pedigree 0.48, pedigree (5,5,5,5,4)
- decommissioned chemical production facilities: -1.12e7 kg; lognormal variance with pedigree 0.48, pedigree (5,5,1,5,4)
  properties: carbon content, fossil 0.0169382, carbon content, non-fossil 5.78006e-6, dry mass 1 kg, wet mass 1 kg
- industrial furnace, 1MW, oil: 2.5 unit; lognormal variance with pedigree 0.48, pedigree (5,5,5,5,4)
- road, company, internal: 1.92e6 m2*year; lognormal variance with pedigree 0.48, pedigree (5,5,5,5,4)
- wastewater treatment facility, capacity 1.6E8l/year: 1.67 unit; lognormal variance with pedigree 0.48, pedigree (5,5,5,5,4)

## Inputs from nature
- Occupation, construction site [natural resource, land]: 800000 m2*year; lognormal variance with pedigree 0.2, pedigree (5,5,5,5,4)
- Occupation, industrial area [natural resource, land]: 1.995e7 m2*year; lognormal variance with pedigree 0.064, pedigree (1,4,5,5,1)
- Transformation, from unspecified [natural resource, land]: 400000 m2; lognormal variance with pedigree 0.144, pedigree (1,4,5,5,1)
- Transformation, to industrial area [natural resource, land]: 400000 m2; lognormal variance with pedigree 0.144, pedigree (1,4,5,5,1)

## Sampling procedure
literature and estimations from similar processes

## Extrapolations
Land-use data are based on one small pulp mill. Other information is estimated, based on dataset for integrated paper mill. This dataset has been copied from an original dataset covering the geography RER. The uncertainty has been adjusted accordingly.

## Review by Hans-Jörg Althaus 2003-07-02
passed
