# ethylene glycol monoethyl ether production

Dataset: EcoSpold 2, unit process
Geography: RER
Time period: 2000-01-01 to 2022-12-31
Technology level: current
Classification: EcoSpold01Categories: chemicals/organics
Classification: ISIC rev.4 ecoinvent: 2011:Manufacture of basic chemicals
Tags: ConvertedDataset
Scenario: Business-as-Usual
System model: Substitution, consequential, long-term
Share of production covered: 100 %
Generated by: Jürgen Sutter
Published in: Sutter, J. 2007
Database: ecoinvent
isCopyrightProtected: true
accessRestrictedTo: 1

## General comment
This data represents the production of 1 kg of ethylene glycol monoethyl ether from ethylene oxide. Raw materials are modelled with a stoichiometric calculation. Energy consumptions and emissions estimated. Infrastructure is included with a default value.
This data represents the production of 1 kg of ethylene glycol monoethyl ether from ethylene oxide. Raw materials are modelled with a stoichiometric calculation, Energy consumptions, emissions, infrastructure and transports are calculated with standard values.

## Included activities start
From the reception of ethylene oxide at the factory gate.

## Included activities end
This activity ends with the production of 1 kg of ethylene glycol monoethyl ether, 100% at the factory gate. The dataset includes the input materials, energy uses, infrastructure and emissions.

## Geography
The inventory is modelled for Europe.

## Technology
Ethylene glycol monoethyl ether is usually produced by a reaction of ethylene oxide with ethanol.
C2H4O + C2H6O → C4H10O2
Reference:
Rebsdat, S., Mayer, D.: Ethylene glycol. Published online: 2000. In: Ullmann's Encyclopedia of Industrial Chemistry, Seventh Edition, 2004 Electronic Release (ed. Fiedler E., Grossmann G., Kersebohm D., Weiss G. and Witte C.). 7 th Elec-tronic Release Edition. Wiley InterScience, New York, Online-Version under: http://www.mrw.interscience.wiley.com/emrw/9783527306732/home

## Time period
Time of publications

## Parameters
- fraction, cooling water, cooling pond system, to air: 0.032 dimensionless; name fraction_CW_CP_to_air; lognormal variance with pedigree 0.0413, pedigree (2,3,1,3,1)
  Calculated based on literature value (Scown, C.D., 2011, Water Footprint of U.S. Transportation Fuels and supplying information of the article) (Vionnet, S., Quantis Water Database - Technical Report, 2012).
- fraction, cooling water, once-through system, to air: 0.004 dimensionless; name fraction_CW_OT_to_air; lognormal variance with pedigree 0.0413, pedigree (2,3,1,3,1)
  (same comment as for fraction, cooling water, cooling pond system, to air)
- fraction, cooling water, recirculating system, to air: 0.771 dimensionless; name fraction_CW_R_to_air; lognormal variance with pedigree 0.0413, pedigree (2,3,1,3,1)
  (same comment as for fraction, cooling water, cooling pond system, to air)
- fraction, cooling water, to air: 0.3875 dimensionless; name fraction_CW_to_air; = (0.5*fraction_CW_OT_to_air)+(0.5*fraction_CW_R_to_air); lognormal variance with pedigree 0.092025, pedigree (4,4,3,2,4)
  Calculated value based on literature value (see comments of the other parametres present in this dataset) and expert opinion. In the case when no industry/literature data are available about the type of cooling or directly fraction, cooling water, to air specific for the process a default assumption is applied. It is assumed that the once-through cooling system is used in 50% of all cases and recirculating system is used in another 50% of all cases.

## Reference product
- ethylene glycol monoethyl ether: 1 kg; By-product classification allocatable product; CPC 34170: Ethers, alcohol peroxides, ether peroxides, epoxides, acetals and hemiacetals, and their halogenated, sulphona[…]
  production volume 1.32237 kg
  properties: carbon allocation 0.610169 kg, carbon content 0.610169, carbon content, fossil 0.610169, carbon content, non-fossil 0, dry mass 1 kg, heating value, net 29.6 MJ, price 0.73 EUR2005, water content 0, water in wet mass 0 kg, wet mass 1 kg

## Inputs from technosphere
- chemical factory, organics: 4e-10 unit; lognormal variance with pedigree 0.448, pedigree (4,5,5,5,5)
- electricity, medium voltage: 0.333 kWh; lognormal variance with pedigree 0.1786, pedigree (4,5,5,5,5)
- ethanol, without water, in 99.7% solution state, from ethylene: 0.53801 kg; lognormal variance with pedigree 0.036, pedigree (4,5,5,1,1)
  properties: carbon content, fossil 0.521739, dry mass 1 kg, heating value, net 28.1 MJ, wet mass 1 kg
- ethylene oxide: 0.51462 kg; lognormal variance with pedigree 0.036, pedigree (4,5,5,1,1)
  properties: carbon content, fossil 0.545455, dry mass 1 kg, heating value, net 27.53 MJ, wet mass 1 kg
- heat, district or industrial, natural gas: 2 MJ; lognormal variance with pedigree 0.1786, pedigree (4,5,5,5,5)
  properties: heating value, net 1 MJ

## Inputs from nature
- Water, cooling, unspecified natural origin [natural resource, in water]: 0.024 m3; lognormal variance with pedigree 0.198, pedigree (4,5,5,5,5)

## Emissions to nature
- Carbon dioxide, fossil [air, urban air close to ground]: 0.092446 kg; lognormal variance with pedigree 0.1786, pedigree (4,5,5,5,5)
- Ethanol [air, urban air close to ground]: 5.3801e-5 kg; lognormal variance with pedigree 0.188, pedigree (4,5,5,5,5)
- Ethylene oxide [air, urban air close to ground]: 5.1462e-5 kg; lognormal variance with pedigree 0.188, pedigree (4,5,5,5,5)
- Water [air, unspecified]: 0.0093 m3; lognormal variance with pedigree 0.0407, pedigree (2,2,5,1,1)
- BOD5, Biological Oxygen Demand [water, surface water]: 0.00916 kg; lognormal variance with pedigree 0.188, pedigree (4,5,5,5,5)
- COD, Chemical Oxygen Demand [water, surface water]: 0.00916 kg; lognormal variance with pedigree 0.188, pedigree (4,5,5,5,5)
- DOC, Dissolved Organic Carbon [water, surface water]: 0.00286 kg; lognormal variance with pedigree 0.188, pedigree (4,5,5,5,5)
- Ethanol [water, surface water]: 0.0026847 kg; lognormal variance with pedigree 0.218, pedigree (4,5,5,5,5)
- Ethylene oxide [water, surface water]: 0.002568 kg; lognormal variance with pedigree 0.448, pedigree (4,5,5,5,5)
- TOC, Total Organic Carbon [water, surface water]: 0.00286 kg; lognormal variance with pedigree 0.188, pedigree (4,5,5,5,5)
- Water [water, unspecified]: 0.0147 m3; lognormal variance with pedigree 0.0407, pedigree (2,2,5,1,1)

## Sampling procedure
Standard values

## Review by Roland Hischier 2007-09-21
passed.
-

## Review by Roland Hischier 2011-09-22
Transfer of documentation done.
