# operation, computer, laptop, 68% active work with internet access 0.2 Mbit/s, electricity from renewable energy products

Dataset: EcoSpold 2, unit process
Geography: CH
Time period: 2005-01-01 to 2022-12-31
Technology level: current
Classification: EcoSpold01Categories: electronics/services
Classification: ISIC rev.4 ecoinvent: 8219:Photocopying, document preparation and other specialized office support act
Tags: Operation; ConvertedDataset
Scenario: Business-as-Usual
System model: Substitution, consequential, long-term
Generated by: Marianne Leuenberger
Published in: Leuenberger M. 2010
Database: ecoinvent
isCopyrightProtected: true
accessRestrictedTo: 1

## General comment
The data set represents average values for one hour of work at home using a laptop computer. The data set does not account for energy saved at the company work place and avoided travelling.
[This dataset was already contained in the ecoinvent database version 2. It was not individually updated during the transfer to ecoinvent version 3. Life Cycle Impact Assessment results may still have changed, as they are affected by changes in the supply chain, i.e. in other datasets. This dataset was generated following the ecoinvent quality guidelines for version 2. It may have been subject to central changes described in the ecoinvent version 3 change report (http://www.ecoinvent.org/database/ecoinvent-version-3/reports-of-changes/), and the results of the central updates were reviewed extensively. The changes added e.g. consistent water flows and other information throughout the database. The documentation of this dataset can be found in the ecoinvent reports of version 2, which are still available via the ecoinvent website. The change report linked above covers all central changes that were made during the conversion process.]

## Included activities end
This data set includes the use of hardware (laptop, internet devices) and energy consumption for on hour work at home using broadband access to company server. certified electricity consumption.

## Geography
Data for Swiss conditions

## Technology
Work at home using a laptop computer and broadband transmission for data exchange. Certified mix electricity. Calculated for 1850 annual working hours, 50% internet use, band width: 0.2 Mbit/s

## Reference product
- operation, computer, laptop, 68% active work with internet access 0.2 Mbit/s, electricity from renewable energy products: 1 hour; By-product classification allocatable product; CPC 85: Support services
  production volume 0.0336675 hour
  properties: carbon allocation 0 kg, carbon content 0, price 0.119676 EUR2005

## Inputs from technosphere
- internet access, work, 0.2 Mbit/s: 1 hour; lognormal variance with pedigree 0.1386, pedigree (4,3,5,1,1)
- operation, computer, laptop, 68% active work, electricity from renewable energy products: 1 hour; lognormal variance with pedigree 0.1386, pedigree (4,3,5,1,1)
- operation, internet access equipment, electricity from renewable energy products: 1 hour; lognormal variance with pedigree 0.1386, pedigree (4,3,5,1,1)

## Extrapolations
Average technology

## Review by Christian Bauer 2010-02-07
26.01.2010
passed
C:\Dokumente und Einstellungen\Marianne\Eigene Dateien\Projekte\277_Mobitool\Ecoinvent\Review\Upload 1\[Ecospold_Virtuelle_Mobilitaet-v1.1.xls]X-Process
