# metal working factory construction

Dataset: EcoSpold 2, unit process
Geography: RoW
Time period: 2006-01-01 to 2022-12-31
Technology level: current
Classification: EcoSpold01Categories: metals/general manufacturing
Classification: ISIC rev.4 ecoinvent: 4100:Construction of buildings
Tags: ConvertedDataset
Scenario: Business-as-Usual
System model: Substitution, consequential, long-term
Share of production covered: 0 %
Generated by: Roland Steiner
Published in: Steiner, R. 2007
Database: ecoinvent
isCopyrightProtected: true
accessRestrictedTo: 1

## General comment
4.58E-10 units of this process are needed to produce 1 kg of final product. This dataset can be used in combination with the metal working factory operation to get the operation plus infrastructure of metal working without the machine processing.
[This dataset was already contained in the ecoinvent database version 2. It was not individually updated during the transfer to ecoinvent version 3. Life Cycle Impact Assessment results may still have changed, as they are affected by changes in the supply chain, i.e. in other datasets. This dataset was generated following the ecoinvent quality guidelines for version 2. It may have been subject to central changes described in the ecoinvent version 3 change report (http://www.ecoinvent.org/database/ecoinvent-version-3/reports-of-changes/), and the results of the central updates were reviewed extensively. The changes added e.g. consistent water flows and other information throughout the database. The documentation of this dataset can be found in the ecoinvent reports of version 2, which are still available via the ecoinvent website. The change report linked above covers all central changes that were made during the conversion process.]

## Included activities end
This dataset includes the infrastructure of a metal working factory. This encompasses the buildings, roads and parking spaces on the premises as well as other land occupation.

## Geography
Average data from several local to global sized companies. The main focus is on Germany and Europe.

## Technology
The companies are expected to cover the whole range of metal working.

## Reference product
- metal working factory: 1 unit; By-product classification allocatable product; CPC 53269: Other constructions for manufacturing
  production volume 2.67763 unit
  properties: carbon allocation 0 kg, carbon content 0, price 4.81654e7 EUR2005

## Inputs from technosphere
- building, hall: 274000 m2; lognormal variance with pedigree 0.3208, pedigree (1,3,5,5,3)
- road, company, internal: 1.62e7 m2*year; lognormal variance with pedigree 0.3208, pedigree (1,3,5,5,3)

## Inputs from nature
- Occupation, industrial area [natural resource, land]: 3.46e7 m2*year; lognormal variance with pedigree 0.0608, pedigree (1,3,5,5,3)
- Occupation, traffic area, road network [natural resource, land]: 1.62e7 m2*year; lognormal variance with pedigree 0.0608, pedigree (1,3,5,5,3)
- Transformation, from unspecified [natural resource, land]: 854000 m2; lognormal variance with pedigree 0.1408, pedigree (1,3,5,5,3)
- Transformation, to industrial area [natural resource, land]: 692000 m2; lognormal variance with pedigree 0.1408, pedigree (1,3,5,5,3)
- Transformation, to traffic area, road network [natural resource, land]: 162000 m2; lognormal variance with pedigree 0.1408, pedigree (1,3,5,5,3)

## Extrapolations
none This dataset has been copied from an original dataset covering the geography RER. The uncertainty has been adjusted accordingly.

## Review by Sébastien Humbert 2007-11-14
passed
none
