# packaging glass production, green

Dataset: EcoSpold 2, unit process
Geography: DE
Time period: 1996-01-01 to 2022-12-31
Technology level: current
Classification: ISIC rev.4 ecoinvent: 2310:Manufacture of glass and glass products
Classification: EcoSpold01Categories: glass/packaging
Tags: ConvertedDataset
Scenario: Business-as-Usual
System model: Substitution, consequential, long-term
Share of production covered: 67 %
Generated by: Roland Hischier
Published in: Hischier R. 2007
Database: ecoinvent
isCopyrightProtected: true
accessRestrictedTo: 1

## General comment
This dataset represents the production of 1 kg of green packaging glass from a mix of primary and secondary raw materials.
Material and energy inputs as well as water consumption, emissions, and waste production are based on literature sources. Transport is an estimation based on a Swiss production site. Infrastructure is an estimation based on average European packaging glass factories.
[This dataset was already contained in the ecoinvent database version 2. It was not individually updated during the transfer to ecoinvent version 3. Life Cycle Impact Assessment results may still have changed, as they are affected by changes in the supply chain, i.e. in other datasets. This dataset was generated following the ecoinvent quality guidelines for version 2. It may have been subject to central changes described in the ecoinvent version 3 change report (http://www.ecoinvent.org/database/ecoinvent-version-3/reports-of-changes/), and the results of the central updates were reviewed extensively. The changes added e.g. consistent water flows and other information throughout the database. The documentation of this dataset can be found in the ecoinvent reports of version 2, which are still available via the ecoinvent website. The change report linked above covers all central changes that were made during the conversion process.]
CO2 emissions have been recalculated from the carbon content in raw materials and fuels.

## Included activities start
From the reception of precursors silica sand, soda, unsorted glass cullets, limestone, dolomite, feldspar, and chemicals inorganics at the factory gate.

## Included activities end
This activity ends with the production of 1 kg of green packaging glass. The dataset includes material and energy inputs, water consumption, emissions to air and water, waste production, transport and infrastructure.

## Geography
average German situation, based on an industry survey

## Technology
Packaging glass is produced in a two stage moulding process with pressing and blowing techniques. The whole process is fully automatic and consists of five different stages:
1. Production of a molten glass piece (gob) with correct weight and temperature.
2. Forming of the primary shape in a first mould (blank mould) with compressed air pressure
3. Transfer to the final mould (finish mould)
4. Bringing the shaping process to an end by blowing the container with compressed air until the shape of the final mould
5. Post forming processes
The melting process is the central one. As the first glass forming material, sand, has a very high melting point. Soda as a fluxing agent is used to reduce the melting temperature. When heating soda, this is decomposed into sodium oxide Na2O, the actual fluxing agent, and into carbon dioxide that is released. Metal oxides in form of limestone (CaCO3 that decomposes to CaO), dolomite (-> Ca- and Mg-Oxides), feldspar are used as stabilizators and therefore to improve the hardness and chemical resistance of glass. For green glass colouring agents are added.

## Parameters
- fraction, process water, to air: 0.111111 dimensionless; name fraction_PW_to_air; lognormal variance with pedigree 0.092025, pedigree (4,4,3,2,4)
  Literature value (Statistics Canada, 2007 & Shaffer, K.H., 2008, Consumptive water use in the Great Lakes Basin, USGS) (Vionnet, S., Quantis Water Database - Technical Report, 2012).

## Reference product
- packaging glass, green: 1 kg; By-product classification allocatable product; CPC 37191: Bottles, jars, phials and other containers, of glass, of a kind used for the conveyance or packing of goods, e[…]
  production volume 1.75e9 kg
  properties: carbon allocation 0 kg, carbon content 0, carbon content, fossil 0, carbon content, non-fossil 0, dry mass 1 kg, price 0.392171 EUR2005, water content 0, water in wet mass 0 kg, wet mass 1 kg

## Inputs from technosphere
- EUR-flat pallet: 0.000716 unit; lognormal variance with pedigree 0.012625, pedigree (2,4,5,2,1)
  properties: carbon content, fossil 0.0311351, carbon content, non-fossil 0.58833, dry mass 18.3333 kg, heating value, net 335.11 MJ, water content 0.2, wet mass 22 kg
- chemical, inorganic: 0.00114 kg; lognormal variance with pedigree 0.0003, pedigree (1,2,5,1,1)
  properties: carbon content, fossil 0.003, dry mass 1 kg, wet mass 1 kg
- diesel: 0.00177 kg; lognormal variance with pedigree 0.0003, pedigree (1,2,5,1,1)
  properties: carbon content, fossil 0.865, dry mass 1 kg, heating value, net 42.8 MJ, wet mass 1 kg
- dolomite: 0.0144 kg; lognormal variance with pedigree 0.0003, pedigree (1,2,5,1,1)
  properties: carbon content, fossil 0.130435, dry mass 1 kg, heating value, net 3.95 MJ, wet mass 1 kg
- electricity, medium voltage: 0.159 kWh; lognormal variance with pedigree 0.0003, pedigree (1,2,5,1,1)
- feldspar: 0.0162 kg; lognormal variance with pedigree 0.0003, pedigree (1,2,5,1,1)
  properties: dry mass 1 kg, wet mass 1 kg
- glass cullet, sorted: 0.848 kg
  properties: dry mass 1 kg, wet mass 1 kg
- graphite: 1.25e-6 kg; lognormal variance with pedigree 0.0003, pedigree (1,2,5,1,1)
  properties: carbon content, fossil 1, dry mass 1 kg, heating value, net 30.3 MJ, wet mass 1 kg
- heavy fuel oil: 0.0224 kg; lognormal variance with pedigree 0.0003, pedigree (1,2,5,1,1)
  properties: carbon content, fossil 0.849, dry mass 1 kg, heating value, net 41.2 MJ, wet mass 1 kg
- lime: 0.0199 kg; lognormal variance with pedigree 0.0003, pedigree (1,2,5,1,1)
  properties: carbon content, fossil 0.120005, dry mass 1 kg, wet mass 1 kg
- lubricating oil: 2.38e-5 kg; lognormal variance with pedigree 0.0003, pedigree (1,2,5,1,1)
  properties: carbon content, fossil 0.75, dry mass 1 kg, heating value, net 40.2 MJ, wet mass 1 kg
- municipal solid waste: -0.005 kg; lognormal variance with pedigree 0.012625, pedigree (2,4,1,2,1)
  properties: carbon content, fossil 0.171549, carbon content, non-fossil 0.261655, dry mass 0.771 kg, heating value, net 11.74 MJ, water content 0.297017, wet mass 1 kg
- natural gas, high pressure: 0.0641026 m3; lognormal variance with pedigree 0.0003, pedigree (1,2,5,1,1)
  properties: carbon content, fossil 0.602381, dry mass 0.84 kg, heating value, gross 39 MJ, heating value, net 36 MJ, wet mass 0.84 kg
- packaging glass factory: 1.25e-10 unit; lognormal variance with pedigree 0.4521, pedigree (5,4,5,3,4)
- polyethylene, high density, granulate: 0.0117 kg; lognormal variance with pedigree 0.012625, pedigree (2,4,5,2,1)
  properties: carbon content, fossil 0.857143, dry mass 1 kg, heating value, net 42.47 MJ, wet mass 1 kg
- silica sand: 0.0987 kg; lognormal variance with pedigree 0.0003, pedigree (1,2,5,1,1)
  properties: dry mass 0.99 kg, water content 0.010101, wet mass 1 kg
- soda ash, light: 0.0305 kg; lognormal variance with pedigree 0.0003, pedigree (1,2,5,1,1)
  properties: carbon content, fossil 0.0517241, dry mass 1 kg, heating value, net 3.43 MJ, wet mass 1 kg
- solid bleached and unbleached board carton: 0.0176 kg; lognormal variance with pedigree 0.012625, pedigree (2,4,5,2,1)
  properties: carbon content, fossil 0.0190874, carbon content, non-fossil 0.327779, dry mass 0.945 kg, heating value, net 9.8 MJ, water content 0.0582011, wet mass 1 kg

## Inputs from nature
- Water, unspecified natural origin [natural resource, in water]: 0.000212 m3; lognormal variance with pedigree 0.0003, pedigree (1,2,5,1,1)

## Emissions to nature
- Ammonia [air, urban air close to ground]: 3.55e-8 kg; lognormal variance with pedigree 0.0403, pedigree (1,2,5,1,1)
- Antimony ion [air, urban air close to ground]: 1.91e-8 kg; lognormal variance with pedigree 0.6621, pedigree (1,4,5,3,1)
- Arsenic ion [air, urban air close to ground]: 1.91e-8 kg; lognormal variance with pedigree 0.6621, pedigree (1,4,5,3,1)
- Benzene [air, urban air close to ground]: 9.59e-8 kg; lognormal variance with pedigree 0.1203, pedigree (1,2,5,1,1)
- Benzo(a)pyrene [air, urban air close to ground]: 1.37e-11 kg; lognormal variance with pedigree 0.1203, pedigree (1,2,5,1,1)
- Cadmium II [air, urban air close to ground]: 1.91e-8 kg; lognormal variance with pedigree 0.6621, pedigree (1,4,5,3,1)
- Carbon dioxide, fossil [air, urban air close to ground]: 0.238627 kg; lognormal variance with pedigree 0.0003, pedigree (1,2,5,1,1)
- Carbon monoxide, fossil [air, urban air close to ground]: 9.5e-6 kg; lognormal variance with pedigree 0.6503, pedigree (1,2,5,1,1)
- Chromium III [air, urban air close to ground]: 1.91e-8 kg; lognormal variance with pedigree 0.6621, pedigree (1,4,5,3,1)
- Cobalt II [air, urban air close to ground]: 1.91e-8 kg; lognormal variance with pedigree 0.6621, pedigree (1,4,5,3,1)
- Copper ion [air, urban air close to ground]: 1.91e-8 kg; lognormal variance with pedigree 0.6621, pedigree (1,4,5,3,1)
- Dinitrogen monoxide [air, urban air close to ground]: 5.88e-7 kg; lognormal variance with pedigree 0.0403, pedigree (1,2,5,1,1)
- Dioxins, measured as 2,3,7,8-tetrachlorodibenzo-p-dioxin [air, urban air close to ground]: 1.06e-16 kg; lognormal variance with pedigree 0.0403, pedigree (1,2,5,1,1)
- Formaldehyde [air, urban air close to ground]: 4.09e-7 kg; lognormal variance with pedigree 0.1203, pedigree (1,2,5,1,1)
- Hydrocarbons, aliphatic, alkanes, unspecified [air, urban air close to ground]: 1.19e-5 kg; lognormal variance with pedigree 0.0403, pedigree (1,2,5,1,1)
- Hydrochloric acid [air, urban air close to ground]: 1.6e-5 kg; lognormal variance with pedigree 0.0403, pedigree (1,2,5,1,1)
- Hydrogen fluoride [air, urban air close to ground]: 4.94e-6 kg; lognormal variance with pedigree 0.0403, pedigree (1,2,5,1,1)
- Lead II [air, urban air close to ground]: 2.19e-7 kg; lognormal variance with pedigree 0.6621, pedigree (1,4,5,3,1)
- Manganese II [air, urban air close to ground]: 1.91e-8 kg; lognormal variance with pedigree 0.6621, pedigree (1,4,5,3,1)
- Methane, fossil [air, urban air close to ground]: 1.21e-7 kg; lognormal variance with pedigree 0.0403, pedigree (1,2,5,1,1)
- NMVOC, non-methane volatile organic compounds [air, urban air close to ground]: 4.42e-6 kg; lognormal variance with pedigree 0.0403, pedigree (1,2,5,1,1)
- Nickel II [air, urban air close to ground]: 1.91e-8 kg; lognormal variance with pedigree 0.6621, pedigree (1,4,5,3,1)
- Nitrogen oxides [air, urban air close to ground]: 0.000841 kg; lognormal variance with pedigree 0.0403, pedigree (1,2,5,1,1)
- Particulate Matter, < 2.5 um [air, urban air close to ground]: 1.74e-6 kg; lognormal variance with pedigree 0.3003, pedigree (1,2,5,1,1)
- Particulate Matter, > 10 um [air, urban air close to ground]: 7.78e-6 kg; lognormal variance with pedigree 0.0403, pedigree (1,2,5,1,1)
- Particulate Matter, > 2.5 um and < 10um [air, urban air close to ground]: 7.1e-7 kg; lognormal variance with pedigree 0.1203, pedigree (1,2,5,1,1)
- Selenium IV [air, urban air close to ground]: 2.08e-6 kg; lognormal variance with pedigree 0.6621, pedigree (1,4,5,3,1)
- Sulfur dioxide [air, urban air close to ground]: 0.000703 kg; lognormal variance with pedigree 0.0003, pedigree (1,2,5,1,1)
- Water [air, unspecified]: 2.35556e-5 m3; lognormal variance with pedigree 0.0407, pedigree (2,2,5,1,1)
- Water [water, unspecified]: 0.000188444 m3; lognormal variance with pedigree 0.0407, pedigree (2,2,5,1,1)

## Sampling procedure
German LCA study

## Review by Hans-Jörg Althaus 2003-08-20
passed

## Review by Roland Hischier 2011-11-29
Transfer of documentation done.

## Review by Emilia Moreno Ruiz 2013-07-22
restructuring of the "glass cullet, sorted" supply chain
