# maintenance, lorry 40 metric ton

Dataset: EcoSpold 2, unit process
Geography: CH
Time period: 1990-01-01 to 2022-12-31
Technology level: current
Classification: EcoSpold01Categories: transport systems/road
Classification: ISIC rev.4 ecoinvent: 4520:Maintenance and repair of motor vehicles
Tags: ConvertedDataset
Scenario: Business-as-Usual
System model: Substitution, consequential, long-term
Generated by: Michael Spielmann (obsolete)
Published in: Spielmann M. 2007
Database: ecoinvent
isCopyrightProtected: true
accessRestrictedTo: 1

## General comment
The dataset represents the maintenance of one lorry 40t.
[This dataset was already contained in the ecoinvent database version 2. It was not individually updated during the transfer to ecoinvent version 3. Life Cycle Impact Assessment results may still have changed, as they are affected by changes in the supply chain, i.e. in other datasets. This dataset was generated following the ecoinvent quality guidelines for version 2. It may have been subject to central changes described in the ecoinvent version 3 change report (http://www.ecoinvent.org/database/ecoinvent-version-3/reports-of-changes/), and the results of the central updates were reviewed extensively. The changes added e.g. consistent water flows and other information throughout the database. The documentation of this dataset can be found in the ecoinvent reports of version 2, which are still available via the ecoinvent website. The change report linked above covers all central changes that were made during the conversion process.]

## Included activities start
The activity starts with the consumption of the components and materials for the maintenance.

## Included activities end
The dataset ends with the maintenance of one lorry 40t. The dataset includes the consumption of the components and materials for the maintenance, the consumption of lead (battery) and until and including the energy consumption (electricity and light fuel oil).

## Geography
Data represent Swiss conditions

## Technology
no technologies are specified

## Time period
The foundations for the calculations are “Selbstkosten des Gütertransportes” ASTAG (1991) and personal information from a lorry manufacturer (IVECO). The determined data are representative for non-urban use of the vehicles and a yearly traffic performance of 70000 vkm/a (van 30000 km/a). The kilometric performance of the tyres depends on the number of axes and the number of starts and stops. The input value for lead (battery) has been calculated assuming two batteries – with a total weight of 108 kg – per truck. Based on Dietrich (1999) we assume a share of lead, H2SO4 and plastic of 68.2% 25.8% and 6%, respectively. For the energy consumption due to maintenance activities, data from Maibach et al. (1999) have been employed. Is included energy expenditures of heating and lighting of service garages as well as energy expenditures for washing bays.
References:
ASTAG (1991) Die Selbstkosten des Gütertransports mit Nutzfahrzeugen. Schweizer Nutzfahrzeugverband, Bern.
Maibach M., Peter D. and Seiler B. (1999) Ökoinventar Transporte: Grundlagen für den ökologischen Vergleich von Transportsystemen und den Einbezug von Transportsystemen in Ökobilanzen. Technischer Schlussbericht. In: Schweizerischer Nationalfonds zur Förderung der wissenschaftlichen Forschung (ed. SPP Umwelt M.). 2nd Edition. INFRAS, Zürich

## Reference product
- maintenance, lorry 40 metric ton: 1 unit; By-product classification allocatable product; CPC 87141: Maintenance and repair services of motor vehicles
  production volume 0.0336675 unit
  properties: carbon allocation 0 kg, carbon content 0, price 11903.2 EUR2005

## Inputs from technosphere
All rows: lognormal variance with pedigree 0.12, pedigree (1,1,5,1,1)
- electricity, low voltage: 4430 kWh
- heat, district or industrial, other than natural gas: 53865 MJ
  properties: heating value, net 1 MJ
- lead: 210 kg
  properties: dry mass 1 kg, wet mass 1 kg
- lubricating oil: 1170 kg
  properties: carbon content, fossil 0.75, dry mass 1 kg, heating value, net 40.2 MJ, wet mass 1 kg
- paper, woodfree, uncoated: 35 kg
  properties: carbon content, fossil 0.0251406, carbon content, non-fossil 0.281215, dry mass 0.945 kg, heating value, net 14.11 MJ, water content 0.0582011, wet mass 1 kg
- polyethylene, high density, granulate: 142 kg
  properties: carbon content, fossil 0.857143, dry mass 1 kg, heating value, net 42.47 MJ, wet mass 1 kg
- reinforcing steel: 1240 kg
  properties: carbon content, fossil 0.004, dry mass 1 kg, wet mass 1 kg
- sulfuric acid: 79.71 kg
  properties: dry mass 1 kg, wet mass 1 kg
- synthetic rubber: 4210 kg
  properties: carbon content, fossil 0.871949, dry mass 1 kg, heating value, net 26.42 MJ, wet mass 1 kg

## Sampling procedure
data based on expert estimate and further assumption to determine the material consumption.

## Review by Niels Jungbluth 2006-09-27
passed.

## Review by Emilia Moreno Ruiz 2012-03-15
trainee DS, OK, Liliane Klemann
