# heat production, softwood chips from forest, at furnace 50kW

Dataset: EcoSpold 2, unit process
Geography: RoW
Time period: 2000-01-01 to 2022-12-31
Technology level: current
Classification: EcoSpold01Categories: wood energy/heating systems
Classification: ISIC rev.4 ecoinvent: 3530:Steam and air conditioning supply
Synonyms: automatic wood heating system
Scenario: Business-as-Usual
System model: Substitution, consequential, long-term
Share of production covered: 0.1 %
Generated by: Christian Bauer
Published in: Bauer, C. 2007
Database: ecoinvent
isCopyrightProtected: true
accessRestrictedTo: 1

## General comment
This activity represents the combustion of natural wood chips from forest in Switzerland and is used for the global activity as first approximation with uncertainty factors adjusted accordingly. Characteristics of the of wood chips to be burned: Dry wood density 430kg/m3; Energy content (LHV, oven-dry) 19.1 MJ/kg. The humidity when burned is assumed to be at an adequate level for appropriate combustion after some weeks of drying in the storage. Air emission factors as well as the boiler efficiency represent average annual operation including start and stop (warm-up and shut-down). Therefore, emission data will be higher and efficiency will be lower than rated values provided by manufacturers. The inventory shall be considered as being representative also for boilers with nominal capacities below 70kW.
[This dataset is meant to replace the following datasets:
- heat production, softwood chips from forest, at furnace 50kW, GLO, 2000 - 2001]

## Included activities start
from delivery of wood chips

## Included activities end
This activity describes the combustion of natural wood chips from forest. Included are the infrastructure, the wood requirements (softwood chips from forest), the emissions to air, the electricity needed for operation, and the disposal of the ashes.

## Geography
LCI data for Switzerland were used for the GLO activityy as first approximation with uncertainty factors adjusted accordingly.

## Technology
Boiler of average technology available on the Swiss market.

## Time period
Key emission factors PM, CO, NMVOC, CH4, NOx as well as the average annual efficiency have been updated using the latest available information. Other emission data are from the second half of the 1990´s.

## Parameters
- scaling factor: 1.42857 dimensionless; name scaling_factor; = 1/0.7; lognormal variance with pedigree 0.012, pedigree (2,3,1,5,3)
  The scaling factor corresponds to the inverse of the average annual efficiency of the heating system, including start/stop (warm up and cool down). Therefore, this efficiency will be lower than figures provided by manufacturers. The estimated value was provided by T.Nussbaumer, Verenum, and represents the average installed boiler in this size category in Switzerland. Uncertainty factors for the GLO activity have been increased accordingly.

## Reference product
- heat, central or small-scale, other than natural gas: 1 MJ; By-product classification allocatable product; CPC 17300: Steam and hot water
  production volume 2.63051e10 MJ
  properties: Corresponding fuel use 1.25 MJ, carbon allocation 0 kg, carbon content 0, heating value, net 1 MJ, price 0.0106 EUR2005

## Inputs from technosphere
- electricity, low voltage: 0.000228039, 8.28988e-5, 1.69546e-5, 6.74465e-5, 0.000486254, 0.000452697, 0.00405914, 0.000563708 kWh (8 suppliers, which the file names only by identifier); sum of these 0.00595714 kWh; lognormal variance with pedigree 0.44, pedigree (2,2,5,5,2)
- furnace, wood chips, with silo, 50kW: 1.38889e-7 unit
- wood ash mixture, pure: -0.000459586, -0.000220414 kg (2 suppliers, which the file names only by identifier); sum of these -0.00068 kg; lognormal variance with pedigree 0.002, pedigree (1,1,1,5,1)
  properties: carbon content, non-fossil 0.012, dry mass 1 kg, wet mass 1 kg
- wood chips, wet, measured as dry mass: 0.00149318, 0.0731354, 0.000165708 kg (3 suppliers, which the file names only by identifier); sum of these 0.0747943 kg; lognormal variance with pedigree 0.002, pedigree (1,1,4,5,1)
  properties: carbon content, non-fossil 0.494, dry mass 1 kg, heating value, net 10.84 MJ, water content 1.4, wet mass 2.4 kg

## Emissions to nature
- Acetaldehyde [air, urban air close to ground]: 8.71429e-8 kg; lognormal variance with pedigree 0.432, pedigree (1,1,4,5,1)
- Ammonia [air, urban air close to ground]: 2.47143e-6 kg; lognormal variance with pedigree 0.432, pedigree (1,1,4,5,1)
- Arsenic ion [air, urban air close to ground]: 1.42857e-9 kg; lognormal variance with pedigree 0.432, pedigree (1,1,4,5,1)
- Benzene [air, urban air close to ground]: 1.3e-6 kg; lognormal variance with pedigree 0.432, pedigree (1,1,4,5,1)
- Benzene, ethyl- [air, urban air close to ground]: 4.28571e-8 kg; lognormal variance with pedigree 0.432, pedigree (1,1,4,5,1)
- Benzene, hexachloro- [air, urban air close to ground]: 1.02857e-14 kg; lognormal variance with pedigree 0.432, pedigree (1,1,4,5,1)
- Benzo(a)pyrene [air, urban air close to ground]: 7.14286e-10 kg; lognormal variance with pedigree 0.432, pedigree (1,1,4,5,1)
- Bromine [air, urban air close to ground]: 8.57143e-8 kg; lognormal variance with pedigree 0.432, pedigree (1,1,4,5,1)
- Cadmium II [air, urban air close to ground]: 1e-9 kg; lognormal variance with pedigree 0.432, pedigree (1,1,4,5,1)
- Calcium [air, urban air close to ground]: 8.35714e-6 kg; lognormal variance with pedigree 0.432, pedigree (1,1,4,5,1)
- Carbon dioxide, non-fossil [air, urban air close to ground]: 0.145714 kg; lognormal variance with pedigree 0.002, pedigree (1,1,4,5,1)
- Carbon monoxide, non-fossil [air, urban air close to ground]: 0.000857143 kg; lognormal variance with pedigree 0.022, pedigree (1,1,4,5,1)
- Chlorine [air, urban air close to ground]: 2.57143e-7 kg; lognormal variance with pedigree 0.432, pedigree (1,1,4,5,1)
- Chromium III [air, urban air close to ground]: 5.65714e-9 kg; lognormal variance with pedigree 0.432, pedigree (1,1,4,5,1)
- Chromium VI [air, urban air close to ground]: 5.71429e-11 kg; lognormal variance with pedigree 0.482, pedigree (1,1,4,5,1)
- Copper ion [air, urban air close to ground]: 3.14286e-8 kg; lognormal variance with pedigree 0.432, pedigree (1,1,4,5,1)
- Dinitrogen monoxide [air, urban air close to ground]: 4.28571e-6 kg; lognormal variance with pedigree 0.432, pedigree (1,1,4,5,1)
- Dioxins, measured as 2,3,7,8-tetrachlorodibenzo-p-dioxin [air, urban air close to ground]: 4.42857e-14 kg; lognormal variance with pedigree 0.432, pedigree (1,1,4,5,1)
- Fluorine [air, urban air close to ground]: 7.14286e-8 kg; lognormal variance with pedigree 0.432, pedigree (1,1,4,5,1)
- Formaldehyde [air, urban air close to ground]: 1.85714e-7 kg; lognormal variance with pedigree 0.432, pedigree (1,1,4,5,1)
- Hydrocarbons, aliphatic, alkanes, unspecified [air, urban air close to ground]: 1.3e-6 kg; lognormal variance with pedigree 0.432, pedigree (1,1,4,5,1)
- Hydrocarbons, aliphatic, unsaturated [air, urban air close to ground]: 4.42857e-6 kg; lognormal variance with pedigree 0.432, pedigree (1,1,4,5,1)
- Lead II [air, urban air close to ground]: 3.57143e-8 kg; lognormal variance with pedigree 0.432, pedigree (1,1,4,5,1)
- Magnesium [air, urban air close to ground]: 5.14286e-7 kg; lognormal variance with pedigree 0.432, pedigree (1,1,4,5,1)
- Manganese II [air, urban air close to ground]: 2.42857e-7 kg; lognormal variance with pedigree 0.432, pedigree (1,1,4,5,1)
- Mercury II [air, urban air close to ground]: 4.28571e-10 kg; lognormal variance with pedigree 0.432, pedigree (1,1,4,5,1)
- Methane, non-fossil [air, urban air close to ground]: 1.28571e-5 kg; lognormal variance with pedigree 0.432, pedigree (1,1,4,5,1)
- NMVOC, non-methane volatile organic compounds [air, urban air close to ground]: 3e-5 kg; lognormal variance with pedigree 0.032, pedigree (1,1,4,5,1)
- Nickel II [air, urban air close to ground]: 8.57143e-9 kg; lognormal variance with pedigree 0.432, pedigree (1,1,4,5,1)
- Nitrogen oxides [air, urban air close to ground]: 0.000142857 kg; lognormal variance with pedigree 0.022, pedigree (1,1,4,5,1)
- PAH, polycyclic aromatic hydrocarbons [air, urban air close to ground]: 1.58571e-8 kg; lognormal variance with pedigree 0.432, pedigree (1,1,4,5,1)
- Particulate Matter, < 2.5 um [air, urban air close to ground]: 0.000128571 kg; lognormal variance with pedigree 0.032, pedigree (1,1,4,5,1)
- Particulate Matter, > 2.5 um and < 10um [air, urban air close to ground]: 7.14286e-6 kg; lognormal variance with pedigree 0.43, pedigree (2,2,4,5,2)
- Phenol, pentachloro- [air, urban air close to ground]: 1.15714e-11 kg; lognormal variance with pedigree 0.432, pedigree (1,1,4,5,1)
- Phosphorus [air, urban air close to ground]: 4.28571e-7 kg; lognormal variance with pedigree 0.432, pedigree (1,1,4,5,1)
- Potassium I [air, urban air close to ground]: 3.34286e-5 kg; lognormal variance with pedigree 0.432, pedigree (1,1,4,5,1)
- Sodium [air, urban air close to ground]: 1.85714e-6 kg; lognormal variance with pedigree 0.432, pedigree (1,1,4,5,1)
- Sulfur dioxide [air, urban air close to ground]: 3.57143e-6 kg; lognormal variance with pedigree 0.432, pedigree (1,1,4,5,1)
- Toluene [air, urban air close to ground]: 4.28571e-7 kg; lognormal variance with pedigree 0.432, pedigree (1,1,4,5,1)
- Water [air, urban air close to ground]: 0.0001 m3; lognormal variance with pedigree 0.0083, pedigree (2,2,4,5,2)
- Zinc II [air, urban air close to ground]: 4.28571e-7 kg; lognormal variance with pedigree 0.432, pedigree (1,1,4,5,1)
- m-Xylene [air, urban air close to ground]: 1.71429e-7 kg; lognormal variance with pedigree 0.432, pedigree (1,1,4,5,1)

## Sampling procedure
literature

## Extrapolations
This dataset has been copied from an original dataset covering the geography CH. The uncertainty has been adjusted accordingly.
