# treatment of Sn-based antifouling paint emissions

Dataset: EcoSpold 2, unit process
Geography: RoW
Time period: 2010-01-01 to 2022-12-31
Technology level: current
Classification: ISIC rev.4 ecoinvent: 0311:Marine fishing
Scenario: Business-as-Usual
System model: Substitution, consequential, long-term
Generated by: Angel Avadí
Published in: Avadí, A. 2018
Database: ecoinvent
isCopyrightProtected: true
accessRestrictedTo: 1

## General comment
This activity represents the direct emissions to ocean of Sn-based antifouling paint. 2/3 of the dry matter of the active substances present in the paint are assumed to be emitted. Data from analysis of 1 antifouling paints used in Peru

## Included activities start
Direct emissions to the marine environment

## Geography
Data from Peru, extrapolated to global (GLO). Not representative of European conditions

## Technology
One sample of the most common antifouling paints used in Peru, OceanJet, was analysed by the French laboratory UT2A (http://www.univ-pau.fr/ut2a) in 2010. Uncertainty data are also based on measured values.

## Reference product
- antifouling paint emissions: -1 kg; By-product classification Waste; CPC 34666: Hazardous pesticides
  production volume 0.997077 kg
  properties: carbon allocation 0.42 kg, carbon content 0.42, carbon content, fossil 0.21, carbon content, non-fossil 0.21, dry mass 1 kg, price 0 EUR2005, water content 0, water in wet mass 0 kg, wet mass 1 kg

## Emissions to nature
- Copper ion [water, ocean]: 0.254 kg; triangular min 0.215, mostLikely 0.254, max 0.293, pedigree (1,3,4,5,1)
- Dibutyltin [water, ocean]: 9e-7 kg; triangular min 7e-7, mostLikely 9e-7, max 1.1e-6, pedigree (1,3,4,5,1)
- Diphenyltin [water, ocean]: 5.7e-5 kg; triangular min 4.2e-5, mostLikely 5.7e-5, max 7.2e-5, pedigree (1,3,4,5,1)
- Lead II [water, ocean]: 0.000225 kg; triangular min 0.00021, mostLikely 0.000225, max 0.00024, pedigree (1,3,4,5,1)
- Monobutyltin (III) [water, ocean]: 0.000155 kg; triangular min 0.000131, mostLikely 0.000155, max 0.000179, pedigree (1,3,4,5,1)
- Monophenyltin [water, ocean]: 1.7e-7 kg; triangular min 1.6e-7, mostLikely 1.7e-7, max 1.8e-7, pedigree (1,3,4,5,1)
- Oils, unspecified [water, ocean]: 0.558114 kg
- Tin ion [water, ocean]: 0.00039 kg; triangular min 0.000368, mostLikely 0.00039, max 0.000412, pedigree (1,3,4,5,1)
- Tributyltin compounds [water, ocean]: 1.1e-6 kg; triangular min 9e-7, mostLikely 1.1e-6, max 1.3e-6, pedigree (1,3,4,5,1)
- Trioctyltin [water, ocean]: 4e-5 kg; triangular min 3.7e-5, mostLikely 4e-5, max 4.3e-5, pedigree (1,3,4,5,1)
- Triphenyltin [water, ocean]: 1.7e-5 kg; triangular min 1.6e-5, mostLikely 1.7e-5, max 1.8e-5, pedigree (1,3,4,5,1)
- Zinc II [water, ocean]: 0.187 kg; triangular min 0.168, mostLikely 0.187, max 0.206, pedigree (1,3,4,5,1)
