# oat grain, feed production

Dataset: EcoSpold 2, unit process
Geography: CA-QC
Time period: 1996-01-01 to 2022-12-31
Technology level: current
Classification: EcoSpold01Categories: agricultural means of production/feed
Classification: ISIC rev.4 ecoinvent: 1080:Manufacture of prepared animal feeds
Scenario: Business-as-Usual
System model: Substitution, consequential, long-term
Generated by: Dominique Maxime
Database: ecoinvent
isCopyrightProtected: true
accessRestrictedTo: 1

## General comment
The inventory refers to the processing of oats into 1 kg of feedstuff (fresh weight) in an animal feed mill.

## Included activities start
The dataset starts with the reception of feedstuff at the processing centre.

## Included activities end
The activities end with the storage of the feed mixes. The inventory includes processing feedstuff (crushing or milling, heat treatment, dosing, mixing squeezing and pelleting) and the storage of the feed mixes. It also includes water use and wastewater treatment, the transformation and use of land related to the storage buildings. No process emissions (e.g. dust and particulate matter) were included. Packaging is not included.

## Geography
This dataset is extrapolated from an original dataset covering the geography of Switzerland.

## Technology
This dataset is extrapolated from an original dataset which technology refers to expanded feedstuff from organic grain.

## Time period
Years of the publications of the main sources

## Parameters
- fraction, process water, to air: 0.9 dimensionless; lognormal variance with pedigree 0.092025, pedigree (4,4,3,2,4)
- fraction, tap water, to air: 0.9 dimensionless; lognormal variance with pedigree 0.092025, pedigree (4,4,3,2,4)

## Reference product
- oat grain, feed: 1 kg; By-product classification allocatable product; CPC 23319: Preparations used in animal feeding n.e.c.
  production volume 1.37101e8 kg
  properties: carbon allocation 0.425234 kg, carbon content 0.4916, carbon content, fossil 0, carbon content, non-fossil 0.4916, dry mass 0.865 kg, price 0.123051 EUR2005, water content 0.156069, water in wet mass 0.135 kg, wet mass 1 kg

## Inputs from technosphere
- building, multi-storey: 8.5e-6 m3; lognormal variance with pedigree 0.3046, pedigree (3,3,5,5,1)
- electricity, low voltage: 0.035 kWh; lognormal variance with pedigree 0.0134, pedigree (2,3,5,5,1)
- heat, district or industrial, natural gas: 0.13775 MJ; lognormal variance with pedigree 0.0134, pedigree (2,3,5,5,1)
  properties: heating value, net 1 MJ
- oat grain: 1 kg; lognormal variance with pedigree 0.02, pedigree (1,1,5,5,3)
  properties: carbon content, non-fossil 0.4916, dry mass 0.865 kg, price 0.1169 EUR2005, water content 0.156069, wet mass 1 kg
- tap water: 0.056 kg; lognormal variance with pedigree 0.0866, pedigree (3,3,5,5,4)
  properties: carbon content, fossil 0.00178991, dry mass 0.000337476 kg, water content 2962.17, wet mass 1 kg
- wastewater, average: -3.8e-5 m3; lognormal variance with pedigree 0.0866, pedigree (3,3,3,5,4)
  properties: carbon content, non-fossil 0.194039, dry mass 0.346837 kg, water content 2882.2, wet mass 1000 kg

## Inputs from nature
- Occupation, construction site [natural resource, land]: 2e-6 m2*year; lognormal variance with pedigree 0.0446, pedigree (3,3,5,5,1)
- Occupation, industrial area [natural resource, land]: 5e-5 m2*year; lognormal variance with pedigree 0.0446, pedigree (3,3,5,5,1)
- Transformation, from unspecified [natural resource, land]: 1e-6 m2; lognormal variance with pedigree 0.1246, pedigree (3,3,5,5,1)
- Transformation, to industrial area [natural resource, land]: 1e-6 m2; lognormal variance with pedigree 0.1246, pedigree (3,3,5,5,1)

## Emissions to nature
- Water [air, unspecified]: 1.8e-5 m3; lognormal variance with pedigree 0.0427, pedigree (2,2,5,5,1)

## Sampling procedure
Data based on literature, trade statistics and information from feedstuff processing enterprises.

## Extrapolations
This dataset has been extrapolated from an original dataset covering the geography CH and the technology of organic barley feed production, Uncertainty and production volume have been adjusted for oat feed and the CA-QC region. The technology of grain processing can be assumed the same for conventional grain as for organic grain, hence no change is made to the technology-related uncertainty index. Note that exchange properties of the reference product (carbon and water contents) are the same as the input grain, as it is also the case for the original dataset. No loss of grain is considered, due to lack of comprehensive data.
