# zirconium and hafnium tetrachloride production, from zircon

Dataset: EcoSpold 2, unit process
Geography: RoW
Time period: 2020-01-01 to 2024-12-31
Technology level: current
Classification: ISIC rev.4 ecoinvent: 2420:Manufacture of basic precious and other non-ferrous metals
Scenario: Business-as-Usual
System model: Substitution, consequential, long-term
Generated by: Efstathios Kakkos
Database: ecoinvent
isCopyrightProtected: true
accessRestrictedTo: 1

## General comment
This dataset refers to the average global production of 1 kg of nuclear-grade (i.e with hafnium content less than 100 ppm) zirconium tetrachloride and 0.019091 kg of hafnium tetrachloride produced from zircon by applying the carbochlorination process (Zr(Hf)SiO4 + 4C + 4Cl2 → Zr(Hf)Cl4 + SiCl4 + 4CO), which produces the bundled zirconium & hafnium tetrachloride (Zr(Hf)Cl4) and then the extractive distillation process, which separates the bundled Zr(Hf)Cl4 into pure ZrCl4 and HfCl4.
In the present dataset, there are two reference products (zirconium and hafnium tetrachloride), thus allocation (subdivision) of the Life Cycle Inventory (LCI) is required. The allocation is based on metal mass content in zirconium and hafnium tetrachloride. For more information, consult the ''Modelling & Administrative'' section.
Due to lack of data regarding the carbochlorination process of zircon sand, data were taken from the Gao et al. (2018) publication that contains data on the carbochlorination process of titanium. Exception to this are the inputs of zircon sand, petroleum coke, and chlorine, and the outputs of silicon tetrachloride and carbon monoxide emissions. These exchanges were calculated based on the stoichiometric equation that governs the carbochlorination process (for more information consult the individual exchange comments). Data regarding the extractive distillation process, were taken from the Minh et al. (2015) publication.
Reference 1: Gao, F., Nie, Z., Yang, D., Sun, B., Liu, Y., Gong, X., & Wang, Z. (2018). Environmental impacts analysis of titanium sponge production using Kroll process in China. Journal of Cleaner Production, 174, 771-779. doi:https://doi.org/10.1016/j.jclepro.2017.09.240.
Reference 2: Minh, L. Q., Long, N. V. D., Duong, P. L. T., Jung, Y., Bahadori, A., & Lee, M. (2015). Design of an Extractive Distillation Column for the Environmentally Benign Separation of Zirconium and Hafnium Tetrachloride for Nuclear Power Reactor Applications. Energies, 8(9), 10354-10369.

## Included activities start
The activity starts with the processing of zircon. Due to absence of reliable information, it is assumed that zircon is supplied from the global market.

## Included activities end
The activity ends with the production of nuclear-grade zirconium tetrachloride and hafnium tetrachloride,

## Allocation
No allocation is applied.

## Geography
Dataset valid for the entire corresponding region.

## Technology
After the production of the zircon sand, it enters the fluidized bed carbochlorinator, where petroleum coke and chlorine gas react with the zircon sand at 1200°C producing bundled zirconium-hafnium-silicon tetrachlorides and carbon monoxide. The stoichiometric equation is the following; ZrSiO4 ,(HfSiO4 ) + 4 Cl2 + 4 C → ZrCl4 + SiCl4 ,(HfCl4 ) + 4 CO. Afterwards, the bundle product is condensed to remove silicon tetrachloride, since it condenses to higher temperatures than Zr-Hf tetrachlorides. The bundled Zr-Hf product condenses and enters the Zr-Hf separation process.
The composition of the bundled product is assumed to be 98.4% ZrCl4 and 1.6% HfCl4. In the extractive distillation process, a counter flow technique with a column of molten salt is utilized for the separation of the chlorides. During 1 hour of operation, 23405.1 kg of bundled Zr-Hf tetrachlorides enter the molten-salt-based column (consisting of NaCl and KCl with 8:29 M) from the top. The bundled chloride dissolve creating a molten salt system (34.0 mol% NaCl and KCl (8:29 M); 66.0 mol% ZrCl4 and HfCl4). From the top of the column the solvents are circulated to the bottom, while the zirconium-hafnium chloride fumes follow the opposite direction. The rising fumes are progressively enriched in hafnium chlorides and are extracted from the top of the column (distillate stream) while the flow going down is enriched producing nuclear-grade zirconium tetrachlorides, which are condensed and extracted from the bottom stream.

## Time period
Data are considered representative of current production practices.

## Parameters
- amount_of_TiCl4_per_kg_of_titanium_sponge: 3.9626 kg; name TiCl4_amount
  The amount of TiCl4 required is based on the stoichiometric equation: TiCl4 + 2Mg -> Ti + 2MgCl2 (reduction and distillation process), which means that for the production of 1 kg of Ti sponge, 3.9626 kg of TiCl4 are needed.
- amount_of_Zr(Hf)Cl4_required_per_kg_of produced_high-purity_ZrCl4: 1.1956 kg; name ZrHfCl4_amount
  23405.5 kg of Zr(Hf)Cl4 (zirconium tetrachloride bundled with hafnium) with a composition of 98.4% ZrCl4 is entering the extractive distillation column. The recovery rate of ZrCl4 is 85% that ends up in the bottom stream after the recovery of the salts in stripper unit, thus producing 19576.36 kg of high-purity ZrCl4. As a result, approximately 1.1956 kg of Zr(Hf)Cl4 is required for the production of 1 kg of high-purity ZrCl4.
  Reference: Minh, L. Q., Long, N. V. D., Duong, P. L. T., Jung, Y., Bahadori, A., & Lee, M. (2015). Design of an Extractive Distillation Column for the Environmentally Benign Separation of Zirconium and Hafnium Tetrachloride for Nuclear Power Reactor Applications. Energies, 8(9), 10354-10369)

## Reference product
- zirconium tetrachloride: 1 kg; By-product classification allocatable product; CPC 342: Basic inorganic chemicals n.e.c.
  production volume 1.07291e7 kg
  properties: carbon allocation 0 kg, carbon content 0, carbon content, fossil 0, carbon content, non-fossil 0, chlorine content 0.6085, dry mass 1 kg, hafnium content 2.2292e-5, price 4.34111 EUR2005, water content 0, water in wet mass 0 kg, wet mass 1 kg, zirconium content 0.391484

## Inputs from technosphere
- basic oxygen furnace slag: -1.43026 kg; lognormal variance with pedigree 0.0198, pedigree (2,5,4,5,2)
  properties: aluminium content 0.0101034, calcium content 0.324525, dry mass 0.995 kg, iron content 0.182475, magnesium content 0.0350101, manganese content 0.0250783, oxygen content 0.329259, phosphorus content 0.0102096, silicon content 0.0600014, vanadium content 0.00554358, wet mass 1 kg, zirconium content 0.0523268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
- chemical factory, organics: 3.89417e-10 unit; lognormal variance with pedigree 0.3038, pedigree (2,3,1,5,2)
- chlorine, for reuse in zirconium and hafnium tetrachloride production: 0.268374 kg; lognormal variance with pedigree 0.006, pedigree (2,4,2,5,2)
  properties: dry mass 1 kg, price 0.148 EUR2005, wet mass 1 kg
- chlorine, liquid: 1.15527 kg; lognormal variance with pedigree 0.0044, pedigree (2,3,1,5,2)
  properties: dry mass 1 kg, wet mass 1 kg
- electricity, medium voltage: 0.000194295, 0.00121601, 0.00026937, 0.00366719, 0.000654006, 0.0116688, 0.00184141, 0.00272841, 0.0780608, 0.000278338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 kWh (46 suppliers, which the file names only by identifier); sum of these 0.865351 kWh; lognormal variance with pedigree 0.006, pedigree (2,4,2,5,2)
- heat, district or industrial, natural gas: 0.00110585, 0.142711, 0.940512 MJ (3 suppliers, which the file names only by identifier); sum of these 1.08433 MJ; lognormal variance with pedigree 0.006, pedigree (2,4,2,5,2)
- heat, district or industrial, other than natural gas: 0.00329929, 0.0748973, 42.8921 MJ (3 suppliers, which the file names only by identifier); sum of these 42.9703 MJ; lognormal variance with pedigree 0.006, pedigree (2,4,2,5,2)
  properties: corresponding fuel use, propane, furnace >100kW 1.05263 MJ
- hydrochloric acid, without water, in 30% solution state: -0.0301375 kg; lognormal variance with pedigree 0.006, pedigree (2,4,2,5,2)
  properties: dry mass 1 kg, price 0.127 EUR2005, wet mass 1 kg
- low level radioactive waste: -1.85435e-5 m3; lognormal variance with pedigree 0.0532, pedigree (3,5,5,5,2)
  properties: dry mass 2500 kg, wet mass 2500 kg
- petroleum coke: 0.415069 kg; lognormal variance with pedigree 0.006, pedigree (2,4,2,5,2)
  properties: carbon content, fossil 0.885, dry mass 1 kg, wet mass 1 kg
- silicon tetrachloride: -0.424301, -0.424301 kg (2 suppliers, which the file names only by identifier); sum of these -0.848603 kg; lognormal variance with pedigree 0.0034, pedigree (1,3,2,5,1)
  properties: dry mass 1 kg, price 0.5 EUR2005, wet mass 1 kg
- sodium hydroxide, without water, in 50% solution state: 1.3277 kg; lognormal variance with pedigree 0.006, pedigree (2,4,2,5,2)
  properties: dry mass 1 kg, wet mass 1 kg
- tap water: 0.00581467, 0.00140135, 0.00204419, 0.0156643, 0.0031162, 0.0225734, 5.24107e-5, 0.0785782 kg (8 suppliers, which the file names only by identifier); sum of these 0.129245 kg; lognormal variance with pedigree 0.006, pedigree (2,4,2,5,2)
  properties: carbon content, fossil 0.00178991, dry mass 0.000337476 kg, water content 2962.17, wet mass 1 kg
- zircon: 0.915581 kg; lognormal variance with pedigree 0.0034, pedigree (1,3,2,5,1)
  properties: aluminium content 0.0042344, dry mass 1 kg, hafnium content 0.014, iron content 0.0010491, oxygen content 0.346546, silicon content 0.151938, titanium content 0.0017979, wet mass 1 kg, zirconium content 0.4976

## Emissions to nature
- Carbon monoxide, fossil [air, unspecified]: 0.85665 kg; lognormal variance with pedigree 0.0034, pedigree (1,3,2,5,1)

## Sampling procedure
For the carbochlorination process of zircon: Due to absence of data for the inputs and outputs during the production of zirconium & hafnium tetrachloride, the inputs and outputs of the titanium tetrachloride production dataset is assumed here as the best available representation, since titanium tetrachloride is also produced through the carbochlorination of titanium slag/ilmenite concentrate (first step of the Kroll process). The inputs and outputs (byproducts & emissions) for the titanium carbochlorination process were taken from the Gao et al. (2018) publication. Exception to this is the input of total zircon and the output of silicon tetrachloride, whose calculation was solely based on the stoichiometric equation that governs the carbochlorination process (Zr(Hf)SiO4 + 4C + 4Cl2 → Zr(Hf)Cl4 + SiCl4 + 4CO). The input of petroleum coke was calculated considering not only the abovementioned stoichiometric equation but also the fact that petroleum coke is added in excess (53.08% - as in the titanium carbochlorination process) to account for the inefficiency in the reaction. Because of this the carbon monoxide emissions were calculated based on carbon balance of the entire process, without considering the stoichiometric reaction of the process.

All the abovementioned exchanges, have been readjusted to correspond to the production of 1 kg of nuclear-grade zirconium tetrachloride, by multiplying by 1.1956, since 1.1956 kg of Zr(Hf)Cl4 is required in the extractive distillation process in order to produce 1 kg of nuclear-grade (hafnium-free) ZrCl4 (for more information consult the individual exchange comments).

In addition, during the production of zirconium & hafnium sponge through the Kroll process, magnesium chloride is produced as a byproduct, which undergoes electrolysis (MgCl2 → Mg + Cl2) in order to obtain Mg that is fed back to the zirconium & hafnium sponge production process and Cl2 that is fed back to the zirconium and hafnium tetrachloride production process. Therefore, there is the recovered chlorine that is reused in this process and the non-recovered amount that is calculated by subtracting the recovered amount from the stoichiometrically required amount (consult the respective exchange comments for analytical calculation).

For the extractive distillation process: All data relevent to the extractive distillation process (electricity consumption, zirconium & hafnium tetrachloride outputs) were taken from the Minh et al. (2015) publication. The sodium & potassium chloride inputs have not been considered because they are recovered from the stripper units at the end of the process and then returned back to the feed storage, thus staying within the boundaries of the system.

Due to the fact that that there are two reference products in this dataset (zirconium & hafnium tetrachloride), subdivision of the exchange amounts between zirconium tetrachloride and the hafnium tetrachloride is required first. This subdivision is based on the shares of metal mass contained in zirconium tetrachloride and hafnium tetrachloride. The zirconium metal mass in zirconium tetrachloride is roughly 0.39148 kg while the hafnium metal mass in hafnium tetrachloride is roughly 0.01064 kg. The resulting fractions for the subdivision are approximately 97.354% and 2.646%, meaning that 97.354% of the exchanges are allocated to zirconium tetrachloride production and the remaining 2.645% are allocated to hafnium tetrachloride production.

Reference 1: Gao, F., Nie, Z., Yang, D., Sun, B., Liu, Y., Gong, X., & Wang, Z. (2018). Environmental impacts analysis of titanium sponge production using Kroll process in China. Journal of Cleaner Production, 174, 771-779. doi:https://doi.org/10.1016/j.jclepro.2017.09.240.

Reference 2: Minh, L. Q., Long, N. V. D., Duong, P. L. T., Jung, Y., Bahadori, A., & Lee, M. (2015). Design of an Extractive Distillation Column for the Environmentally Benign Separation of Zirconium and Hafnium Tetrachloride for Nuclear Power Reactor Applications. Energies, 8(9), 10354-10369.

## Extrapolations
Approximation of the carbochlorination process of zirconium tetrachloride with the carbochlorination process of titanium tetrachloride (for more information about which data were taken from the titanium tetrachloride production process consult the sampling procedure). There are mostly 2 zirconium - hafnium separation processes used around the world: i) liquid-liquid extraction by using methyl isobutyl ketone (MIBK) as solving agent (dominant process in the USA), or extractive distillation with molten potassium chloroaluminate (KAlCl4) (dominant process in France). Due to lack of quantitative information about the inputs and outputs of these processes, data regarding the zirconium - hafnium separation process through extractive distillation by using sodium & potassium chloride was considered here, based on the Minh et al. (2015) publication.The uncertainty has been adjusted accordingly.

Reference: Minh, L. Q., Long, N. V. D., Duong, P. L. T., Jung, Y., Bahadori, A., & Lee, M. (2015). Design of an Extractive Distillation Column for the Environmentally Benign Separation of Zirconium and Hafnium Tetrachloride for Nuclear Power Reactor Applications. Energies, 8(9), 10354-10369.
