# biomethane pressure reduction, from high to low pressure

Dataset: EcoSpold 2, unit process
Geography: RoW
Time period: 2000-01-01 to 2022-12-31
Technology level: current
Classification: ISIC rev.4 ecoinvent: 3520:Manufacture of gas; distribution of gaseous fuels through mains
Synonyms: Kompogas, Naturgas
Tags: ConvertedDataset
Scenario: Business-as-Usual
System model: Substitution, consequential, long-term
Share of production covered: 100 %
Generated by: Mireille Faist Emmenegger (obsolete)
Published in: Jungbluth N. 2007
Database: ecoinvent
isCopyrightProtected: true
accessRestrictedTo: 1

## General comment
Total network losses are based on published data, repartition of losses on high and low pressure network on calculations with data for other countries.
[This dataset was already contained in the ecoinvent database version 2. It was not individually updated during the transfer to ecoinvent version 3. Life Cycle Impact Assessment results may still have changed, as they are affected by changes in the supply chain, i.e. in other datasets. This dataset was generated following the ecoinvent quality guidelines for version 2. It may have been subject to central changes described in the ecoinvent version 3 change report (http://www.ecoinvent.org/database/ecoinvent-version-3/reports-of-changes/), and the results of the central updates were reviewed extensively. The changes added e.g. consistent water flows and other information throughout the database. The documentation of this dataset can be found in the ecoinvent reports of version 2, which are still available via the ecoinvent website. The change report linked above covers all central changes that were made during the conversion process.]

## Included activities end
This dataset describes the energy requirement and the emissions of the low pressure distribution network in Switzerland.

## Geography
Energy requirements is based on environmental report of Italian company. Total leakages are specific for CH, HD-leakages are calculated out of the total with German data.

## Technology
The quantity of gas delivered in the low pressure network is estimated. Households and half of commercial and of others are assumed to be connected to the low pressure network

## Reference product
- biomethane, low pressure: 1 MJ; By-product classification allocatable product; CPC 17200: Coal gas, water gas, producer gas and similar gases, other than petroleum gases and other gaseous hydrocarbons
  production volume 3.96633 MJ
  properties: carbon allocation 0.0151855 kg, carbon content 0.695496, carbon content, fossil 0, carbon content, non-fossil 0.695496, dry mass 0.0218341 kg, price 0.144 EUR2005, water content 0, water in wet mass 0 kg, wet mass 0.0218341 kg

## Inputs from technosphere
- biomethane, high pressure: 0.0292366 m3; lognormal variance with pedigree 0.0026, pedigree (1,3,5,5,1)
  properties: carbon content, non-fossil 0.695496, dry mass 0.752 kg, heating value, net 34.97 MJ, wet mass 0.752 kg
- heat, central or small-scale, natural gas: 0.000199968, 3.23587e-8 MJ (2 suppliers, which the file names only by identifier); sum of these 0.0002 MJ; lognormal variance with pedigree 0.0026, pedigree (1,3,5,5,1)
  properties: heating value, net 1 MJ
- pipeline, natural gas, low pressure distribution network: 2.8149e-9 km; lognormal variance with pedigree 0.3028, pedigree (2,1,5,5,1)

## Emissions to nature
- Carbon dioxide, non-fossil [air, urban air close to ground]: 8.2047e-6 kg; lognormal variance with pedigree 0.004, pedigree (3,1,5,5,1)
- Hydrogen sulfide [air, urban air close to ground]: 3.1703e-9 kg; lognormal variance with pedigree 0.044, pedigree (3,1,5,5,1)
- Methane, non-fossil [air, urban air close to ground]: 0.00014331 kg; lognormal variance with pedigree 0.124, pedigree (3,1,5,5,1)

## Sampling procedure
statistics

## Extrapolations
none This dataset has been copied from an original dataset covering the geography CH. The uncertainty has been adjusted accordingly.
