# anode production, silicon coated graphite, NMC811, for Li-ion battery

Dataset: EcoSpold 2, unit process
Geography: RoW
Time period: 2016-01-01 to 2022-12-31
Technology level: current
Classification: ISIC rev.4 ecoinvent: 2720:Manufacture of batteries and accumulators
Scenario: Business-as-Usual
System model: Substitution, consequential, long-term
Generated by: Eleonora Crenna
Published in: Dai, Q. 2019
Database: ecoinvent
isCopyrightProtected: true
accessRestrictedTo: 1

## General comment
This dataset represents the production of 1 kg silicon coated graphite-based anode for Li-ion batteries, used in combination with advance cathodes (e.g. nickel-manganese-cobalt in ratio 8:1:1, NMC811). Data are based on literature and expert judgement. For infrastructure, the ecoinvent dataset "chemical factory, organics" is accounted. This dataset is a copy of the corresponding regional dataset. Production volume was adjusted.

## Included activities start
The activity starts when synthetic graphite, silicon and other materials enter the process at the factory.

## Included activities end
The activity ends with the production of silicon coated graphite-based anode at factory gate.

## Geography
The dataset is valid for the production of anode in China, where the data collection occured.

## Technology
This dataset incudes the production of an anode for a Li-ion battery with advance cathode material (i.e. nickel-manganese-cobalt in ratio 8:1:1, NMC811). Synthetic graphite as active material, silicon as coating material, carbon black as conductive additive, styrene butadiene (SBR) and carboxymethyl cellulose (CMC) as binder are mixed in ration 92:2:1:2:3. Deionized water is used as solvent to prepare the anode slurry. The input materials are mixed to form a slurry, then the mixture is dried with the solvent evaporating away, cut and calendered to form the cathode of a Li-ion battery. The energy required to coat the copper conductor foil with the anode slurry is included in this dataset, because it was not possible to separate it from the energy required for the drying step.

## Time period
The time period is from 2016 (year of the collection of data) and 2020 (year of the dataset)

## Reference product
- anode, silicon coated graphite, for Li-ion battery: 1 kg; By-product classification allocatable product; CPC 46950: Carbon electrodes, carbon brushes, lamp carbons, battery carbons and other articles of graphite or other carbo[…]
  production volume 8.96462e6 kg
  properties: carbon allocation 0.957715 kg, carbon content 0.957715, carbon content, fossil 0.948898, carbon content, non-fossil 0.0088164, dry mass 1 kg, price 1.15199 EUR2005, water content 0, water in wet mass 0 kg, wet mass 1 kg

## Inputs from technosphere
- carbon black: 0.01 kg; lognormal variance with pedigree 0.0053, pedigree (3,2,2,5,2)
  properties: carbon content, fossil 0.85, dry mass 1 kg, heating value, net 25.76 MJ, wet mass 1 kg
- carboxymethyl cellulose, powder: 0.03 kg; lognormal variance with pedigree 0.0053, pedigree (3,2,2,5,2)
  properties: carbon content, fossil 0.0979592, carbon content, non-fossil 0.293878, dry mass 1 kg, heating value, net 20.19 MJ, wet mass 1 kg
- chemical factory, organics: 4e-10 unit; lognormal variance with pedigree 0.3582, pedigree (5,5,3,5,3)
- electricity, medium voltage: 0.00760366, 0.0144494, 0.00863463, 0.000173874, 0.000828684, 0.000973038, 0.000252428, 0.0584709, 0.00195651, 0.0964089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 kWh (46 suppliers, which the file names only by identifier); sum of these 0.467426 kWh; lognormal variance with pedigree 0.0058, pedigree (3,3,2,5,2)
- heat, district or industrial, natural gas: 8.48912 MJ; lognormal variance with pedigree 0.0058, pedigree (3,3,2,5,2)
  properties: heating value, net 1 MJ
- latex: 0.0133882, 0.00661185 kg (2 suppliers, which the file names only by identifier); sum of these 0.02 kg; lognormal variance with pedigree 0.0053, pedigree (3,2,2,5,2)
  properties: carbon content, fossil 0.872983, dry mass 1 kg, heating value, net 26.45 MJ, wet mass 1 kg
- silicon, metallurgical grade: 0.02 kg; lognormal variance with pedigree 0.0118, pedigree (2,3,2,5,3)
  properties: dry mass 1 kg, wet mass 1 kg
- synthetic graphite, battery grade: 0.92 kg; lognormal variance with pedigree 0.0053, pedigree (3,2,2,5,2)
  properties: carbon content, fossil 1, dry mass 1 kg, wet mass 1 kg
- wastewater, average: -0.000183837, -4.6201e-6, -0.000768806, -2.73724e-6 m3 (4 suppliers, which the file names only by identifier); sum of these -0.00096 m3; lognormal variance with pedigree 0.25, pedigree (5,5,5,5,5)
  properties: carbon content, non-fossil 0.194039, dry mass 0.346837 kg, water content 2882.2, wet mass 1000 kg
- water, deionised: 0.7333, 0.225887, 0.000813137 kg (3 suppliers, which the file names only by identifier); sum of these 0.96 kg; lognormal variance with pedigree 0.0118, pedigree (2,3,2,5,3)
  properties: wet mass 1 kg

## Sampling procedure
From Literature and expert judgement. The bill of material was taken from Dai et al. (2019), and adjusted to include carboxymethyl cellulose and styrene butadiene as binders, and silicon as coating. The energy consumption is dependent on the storage capacity of the LI-ion battery cell under study (see comments to exchanges)

## Extrapolations
The dataset is extrapolated from CN data; the uncertainty has been adjusted accordingly.
