# limestone quarry construction

Dataset: EcoSpold 2, unit process
Geography: CH
Time period: 2000-01-01 to 2022-12-31
Technology level: current
Classification: ISIC rev.4 ecoinvent: 4290:Construction of other civil engineering projects
Classification: EcoSpold01Categories: construction materials/additives
Synonyms: quarry
Tags: ConvertedDataset
Scenario: Business-as-Usual
System model: Substitution, consequential, long-term
Generated by: Daniel Kellenberger (obsolete)
Published in: Kellenberger D. 2007
Database: ecoinvent
isCopyrightProtected: true
accessRestrictedTo: 1

## General comment
This dataset represents the construction of 1 limestone mine. Data are estimated from air-picture and the mine is considered to have an annual yield of about 380'000 t
[This dataset was already contained in the ecoinvent database version 2. It was not individually updated during the transfer to ecoinvent version 3. Life Cycle Impact Assessment results may still have changed, as they are affected by changes in the supply chain, i.e. in other datasets. This dataset was generated following the ecoinvent quality guidelines for version 2. It may have been subject to central changes described in the ecoinvent version 3 change report (http://www.ecoinvent.org/database/ecoinvent-version-3/reports-of-changes/), and the results of the central updates were reviewed extensively. The changes added e.g. consistent water flows and other information throughout the database. The documentation of this dataset can be found in the ecoinvent reports of version 2, which are still available via the ecoinvent website. The change report linked above covers all central changes that were made during the conversion process.]

## Included activities start
From unoccupied land forseen for a limestone mine.

## Included activities end
The activity ends with the constructed mine. The dataset includes the 'land-use' of the built part of the mine and therefore the production places and the paved roads

## Geography
Data was obtained from Swiss companies.

## Technology
Data corresponds to a medium size Swiss limestone mine.

## Reference product
- limestone quarry infrastructure: 1 unit; By-product classification allocatable product; CPC 53269: Other constructions for manufacturing
  production volume 0.0336675 unit
  properties: carbon allocation 0 kg, carbon content 0, price 122109 EUR2005

## Inputs from technosphere
- building, hall: 500 m2; lognormal variance with pedigree 0.3281, pedigree (4,2,5,1,1)
- building, multi-storey: 480 m3; lognormal variance with pedigree 0.328125, pedigree (4,2,5,2,1)

## Inputs from nature
- Occupation, industrial area [natural resource, land]: 29000 m2*year; lognormal variance with pedigree 0.0581, pedigree (4,2,5,1,1)
- Occupation, traffic area, road network [natural resource, land]: 20000 m2*year; lognormal variance with pedigree 0.0581, pedigree (4,2,5,1,1)
- Transformation, from forest, unspecified [natural resource, land]: 980 m2; lognormal variance with pedigree 0.1481, pedigree (4,2,5,1,1)
- Transformation, to industrial area [natural resource, land]: 580 m2; lognormal variance with pedigree 0.1481, pedigree (4,2,5,1,1)
- Transformation, to traffic area, road network [natural resource, land]: 400 m2; lognormal variance with pedigree 0.1481, pedigree (4,2,5,1,1)

## Sampling procedure
Data is based on a Swiss company (KFN), with a yearly production of 381‘028 t (2001).

## Review by Roberto Dones 2004-07-01
Passed

## Review by Roland Hischier 2011-09-22
Transfer of documentation done.
