# treatment of redmud from bauxite digestion, residual material landfill

Dataset: EcoSpold 2, unit process
Geography: RoW
Time period: 1994-01-01 to 2022-12-31
Technology level: current
Classification: ISIC rev.4 ecoinvent: 3822:Treatment and disposal of hazardous waste
Classification: EcoSpold01Categories: waste management/residual material landfill
Synonyms: red mud from aluminium hydroxyide extraction from bauxite; red mud from alumina production from bauxite; bauxite residue BR
Tags: ConvertedDataset; Treatment
Scenario: Business-as-Usual
System model: Substitution, consequential, long-term
Generated by: Gabor Doka (obsolete)
Published in: Doka G. 2009
Database: ecoinvent
isCopyrightProtected: true
accessRestrictedTo: 1

## General comment
Inventoried waste contains 100% redmud from bauxite digestion; .
waste composition (wet, in ppm): H2O n.a.; O 379730; H n.a.; C 7606.7; S 800; N n.a.; P 1475; B 10; Cl n.a.; Br n.a.; F 1130; I n.a.; Ag n.a.; As 29; Ba n.a.; Cd 4.5; Co 22; Cr 750.97; Cu 36.742; Hg 0.025; Mn 363.32; Mo n.a.; Ni 5.4; Pb 14.142; Sb 0.3; Se 5; Sn n.a.; V 535.08; Zn 36.661; Be 0.7; Sc n.a.; Sr n.a.; Ti 40203; Tl n.a.; W n.a.; Si 104470; Fe 296420; Ca 22446; Al 84217; K n.a.; Mg n.a.; Na 59688;
Share of carbon in waste that is biogenic 0%.
[This dataset was already contained in the ecoinvent database version 2. It was not individually updated during the transfer to ecoinvent version 3. Life Cycle Impact Assessment results may still have changed, as they are affected by changes in the supply chain, i.e. in other datasets. This dataset was generated following the ecoinvent quality guidelines for version 2. It may have been subject to central changes described in the ecoinvent version 3 change report (http://www.ecoinvent.org/database/ecoinvent-version-3/reports-of-changes/), and the results of the central updates were reviewed extensively. The changes added e.g. consistent water flows and other information throughout the database. The documentation of this dataset can be found in the ecoinvent reports of version 2, which are still available via the ecoinvent website. The change report linked above covers all central changes that were made during the conversion process.]

## Included activities end
Waste-specific short-term emissions to water from leachate. Long-term emissions from landfill to ground water.

## Geography
Technology encountered in Switzerland in 2000. Landfill includes base seal and leachate collection system.

## Technology
Swiss residual material landfill for polluted, inorganic waste. With base seal and leachate collection system. Recultivation after closure.

## Time period
Waste composition as given in literature reference, theoretical data or other source. Transfer coefficients from prospective model.

## Reference product
- redmud from bauxite digestion: -1 kg; By-product classification Waste; CPC 39990: Other wastes n.e.c.
  production volume 3.96633 kg
  properties: carbon allocation 0.0076067 kg, carbon content 0.0076067, carbon content, fossil 0.0076067, carbon content, non-fossil 0, dry mass 1 kg, heating value, net 0 MJ, price 0 EUR2005, water content 0, water in wet mass 0 kg, wet mass 1 kg

## Inputs from technosphere
- process-specific burdens, residual material landfill: 0.282874, 0.717126 kg (2 suppliers, which the file names only by identifier); sum of these 1 kg; lognormal variance with pedigree 0.002, pedigree (1,1,5,5,1)
- residual material landfill: 2.0833e-9 unit; lognormal variance with pedigree 0.002, pedigree (1,1,5,5,1)

## Emissions to nature
- Aluminium III [water, ground-, long-term]: 0.025 kg; lognormal variance with pedigree 0.512, pedigree (1,1,5,5,1)
- Aluminium III [water, surface water]: 4.1736e-5 kg; lognormal variance with pedigree 0.882, pedigree (1,1,5,5,1)
- Antimony ion [water, ground-, long-term]: 1.942e-7 kg; lognormal variance with pedigree 1.732, pedigree (1,1,5,5,1)
- Antimony ion [water, surface water]: 1.058e-7 kg; lognormal variance with pedigree 1.752, pedigree (1,1,5,5,1)
- Arsenic ion [water, ground-, long-term]: 2.9e-14 kg; lognormal variance with pedigree 1.152, pedigree (1,1,5,5,1)
- Arsenic ion [water, surface water]: 2.9e-5 kg; lognormal variance with pedigree 1.132, pedigree (1,1,5,5,1)
- BOD5, Biological Oxygen Demand [water, ground-, long-term]: 0.0040636 kg; lognormal variance with pedigree 0.452, pedigree (1,1,5,5,1)
- BOD5, Biological Oxygen Demand [water, surface water]: 6.7839e-6 kg; lognormal variance with pedigree 1.042, pedigree (1,1,5,5,1)
- Beryllium II [water, ground-, long-term]: 2.5343e-7 kg; lognormal variance with pedigree 1.872, pedigree (1,1,5,5,1)
- Beryllium II [water, surface water]: 4.2308e-10 kg; lognormal variance with pedigree 2.332, pedigree (1,1,5,5,1)
- Boron [water, ground-, long-term]: 9.8325e-6 kg; lognormal variance with pedigree 1.272, pedigree (1,1,5,5,1)
- Boron [water, surface water]: 7.8351e-8 kg; lognormal variance with pedigree 1.662, pedigree (1,1,5,5,1)
- COD, Chemical Oxygen Demand [water, ground-, long-term]: 0.012423 kg; lognormal variance with pedigree 0.452, pedigree (1,1,5,5,1)
- COD, Chemical Oxygen Demand [water, surface water]: 2.074e-5 kg; lognormal variance with pedigree 1.042, pedigree (1,1,5,5,1)
- Cadmium II [water, ground-, long-term]: 3.055e-8 kg; lognormal variance with pedigree 7.602, pedigree (1,1,5,5,1)
- Cadmium II [water, surface water]: 5.1002e-11 kg; lognormal variance with pedigree 2.622, pedigree (1,1,5,5,1)
- Calcium II [water, ground-, long-term]: 0.0020282 kg; lognormal variance with pedigree 1.722, pedigree (1,1,5,5,1)
- Calcium II [water, surface water]: 3.3859e-6 kg; lognormal variance with pedigree 1.172, pedigree (1,1,5,5,1)
- Chromium VI [water, ground-, long-term]: 0.0001426 kg; lognormal variance with pedigree 0.702, pedigree (1,1,5,5,1)
- Chromium VI [water, surface water]: 4.5143e-5 kg; lognormal variance with pedigree 0.862, pedigree (1,1,5,5,1)
- Cobalt II [water, ground-, long-term]: 3.7612e-6 kg; lognormal variance with pedigree 1.942, pedigree (1,1,5,5,1)
- Cobalt II [water, surface water]: 6.2791e-9 kg; lognormal variance with pedigree 1.982, pedigree (1,1,5,5,1)
- Copper ion [water, ground-, long-term]: 1.4144e-6 kg; lognormal variance with pedigree 3.752, pedigree (1,1,5,5,1)
- Copper ion [water, surface water]: 2.3612e-9 kg; lognormal variance with pedigree 2.112, pedigree (1,1,5,5,1)
- DOC, Dissolved Organic Carbon [water, ground-, long-term]: 0.0049158 kg; lognormal variance with pedigree 0.452, pedigree (1,1,5,5,1)
- DOC, Dissolved Organic Carbon [water, surface water]: 8.2068e-6 kg; lognormal variance with pedigree 1.042, pedigree (1,1,5,5,1)
- Fluoride [water, ground-, long-term]: 0.0010688 kg; lognormal variance with pedigree 0.642, pedigree (1,1,5,5,1)
- Fluoride [water, surface water]: 6.1237e-5 kg; lognormal variance with pedigree 0.822, pedigree (1,1,5,5,1)
- Iron ion [water, ground-, long-term]: 0.0014856 kg; lognormal variance with pedigree 7.052, pedigree (1,1,5,5,1)
- Iron ion [water, surface water]: 2.4802e-6 kg; lognormal variance with pedigree 1.322, pedigree (1,1,5,5,1)
- Lead II [water, ground-, long-term]: 7.3357e-8 kg; lognormal variance with pedigree 8.142, pedigree (1,1,5,5,1)
- Lead II [water, surface water]: 1.2247e-10 kg; lognormal variance with pedigree 2.502, pedigree (1,1,5,5,1)
- Manganese II [water, ground-, long-term]: 3.0011e-6 kg; lognormal variance with pedigree 6.542, pedigree (1,1,5,5,1)
- Manganese II [water, surface water]: 5.0102e-9 kg; lognormal variance with pedigree 2.012, pedigree (1,1,5,5,1)
- Mercury II [water, ground-, long-term]: 1.18e-9 kg; lognormal variance with pedigree 4.252, pedigree (1,1,5,5,1)
- Mercury II [water, surface water]: 1.97e-12 kg; lognormal variance with pedigree 2.912, pedigree (1,1,5,5,1)
- Nickel II [water, ground-, long-term]: 1.955e-6 kg; lognormal variance with pedigree 1.612, pedigree (1,1,5,5,1)
- Nickel II [water, surface water]: 3.2638e-9 kg; lognormal variance with pedigree 2.072, pedigree (1,1,5,5,1)
- Phosphate [water, ground-, long-term]: 0.0010104 kg; lognormal variance with pedigree 1.172, pedigree (1,1,5,5,1)
- Phosphate [water, surface water]: 1.6868e-6 kg; lognormal variance with pedigree 1.392, pedigree (1,1,5,5,1)
- Selenium IV [water, ground-, long-term]: 3.2367e-6 kg; lognormal variance with pedigree 1.362, pedigree (1,1,5,5,1)
- Selenium IV [water, surface water]: 1.7633e-6 kg; lognormal variance with pedigree 1.392, pedigree (1,1,5,5,1)
- Silicon [water, ground-, long-term]: 0.10424 kg; lognormal variance with pedigree 0.122, pedigree (1,1,5,5,1)
- Silicon [water, surface water]: 0.00023496 kg; lognormal variance with pedigree 0.672, pedigree (1,1,5,5,1)
- Sodium I [water, ground-, long-term]: 0.037288 kg; lognormal variance with pedigree 0.182, pedigree (1,1,5,5,1)
- Sodium I [water, surface water]: 0.0224 kg; lognormal variance with pedigree 0.202, pedigree (1,1,5,5,1)
- Sulfate [water, ground-, long-term]: 0.0021425 kg; lognormal variance with pedigree 0.692, pedigree (1,1,5,5,1)
- Sulfate [water, surface water]: 0.00025749 kg; lognormal variance with pedigree 0.802, pedigree (1,1,5,5,1)
- TOC, Total Organic Carbon [water, ground-, long-term]: 0.0049158 kg; lognormal variance with pedigree 0.452, pedigree (1,1,5,5,1)
- TOC, Total Organic Carbon [water, surface water]: 8.2068e-6 kg; lognormal variance with pedigree 1.042, pedigree (1,1,5,5,1)
- Titanium ion [water, ground-, long-term]: 0.011934 kg; lognormal variance with pedigree 0.582, pedigree (1,1,5,5,1)
- Titanium ion [water, surface water]: 1.9924e-5 kg; lognormal variance with pedigree 0.952, pedigree (1,1,5,5,1)
- Vanadium V [water, ground-, long-term]: 0.00041127 kg; lognormal variance with pedigree 0.762, pedigree (1,1,5,5,1)
- Vanadium V [water, surface water]: 1.3132e-6 kg; lognormal variance with pedigree 1.282, pedigree (1,1,5,5,1)
- Zinc II [water, ground-, long-term]: 4.4931e-7 kg; lognormal variance with pedigree 5.942, pedigree (1,1,5,5,1)
- Zinc II [water, surface water]: 7.501e-10 kg; lognormal variance with pedigree 2.262, pedigree (1,1,5,5,1)

## Sampling procedure
Landfill model based on observed leachate concentrations in literature. Extrapolated to 60'000 years heeding chemical characteristics. Initial waste composition from various literature sources.

## Extrapolations
This dataset has been copied from an original dataset covering the geography CH. The uncertainty has been adjusted accordingly.

## Review by Niels Jungbluth 2009-02-15
passed.
