# sugarcane processing, traditional annexed plant

Dataset: EcoSpold 2, unit process
Geography: CO
Time period: 2012-01-01 to 2022-12-31
Technology level: current
Classification: ISIC rev.4 ecoinvent: 1072:Manufacture of sugar
Synonyms: sugarcane biorefinery
Scenario: Business-as-Usual
System model: Substitution, consequential, long-term
Share of production covered: 100 %
Generated by: Avraam Symeonidis
Database: ecoinvent
isCopyrightProtected: true
accessRestrictedTo: 1

## General comment
This dataset represents an approximation from an average situation of a sugar mil in Brazil. The mill processes circa 2 million metric tonnes of sugarcane stalks per year for the production of raw sugar, ethanol (anhydrous and hydrated) and surplus bagasse. The plant operates 200 days per season.
The industrial process diverts 50% of sugarcane juice for row sugar production and the other 50%, along with molasses (a by-product of sugar crystallization process), is diverted to ethanol production process. It considers high-pressure boilers (22 bar, 300°C), mechanical drives in the crushing mills and azeotropic distillation for anhydrous ethanol production.
Overall process efficiencies assumed were 96% for sugars extraction, 90% for ethanol fermentation and 76.5% for sugar recovery as raw sugar. Each 1000 kg of cane stalks yields 51.3 kg of raw sugar, 32.3 L of hydrated ethanol (93% w/w), 23.0 L of anhydrous ethanol (99.6% w/w); 6.0 kWh of surplus electricity; and 81.8 kg of surplus bagasse (50% moisture).

## Included activities start
This activity starts when sugarcane arrives at the industrial area.

## Included activities end
The dataset includes the sugarcane conversion into raw sugar, ethanol and surplus bagasse. Processing equipment, chemical inputs, industrial area, water use treatment, and emissions to air are included in the inventory. Sugarcane processed arrives with 5% of vegetal impurities (sugarcane straw) and 1% of mineral impurities (dirt). The dataset doesn't include the surplus electricity production in traditional mills. No additional sugarcane straw recovery and industrial use is considered.
The activity ends when products are available at factory gate.

## Geography
The inventory is approximated for an average situation in Colombia.

## Technology
This dataset represents a typical medium-scale annexed sugarcane mill facilitiy.

## Time period
Time period representative for this type of technology employed.

## Reference product
- sugar, from sugarcane: 1 kg; By-product classification allocatable product; CPC 23511: Cane sugar
  production volume 21127.9 kg
  properties: carbon allocation 0.44 kg, carbon content 0.44, carbon content, fossil 0, carbon content, non-fossil 0.44, dry mass 1 kg, price 0.436 EUR2005, water content 0, water in wet mass 0 kg, wet mass 1 kg

## Inputs from technosphere
- acetic acid, without water, in 98% solution state: 4.01559e-6 kg; lognormal variance with pedigree 0.0013, pedigree (2,2,4,1,1)
  properties: carbon content, fossil 0.400016, dry mass 1 kg, heating value, net 14.6 MJ, wet mass 1 kg
- aluminium sulfate, powder: 0.000177778 kg; lognormal variance with pedigree 0.0013, pedigree (2,2,4,1,1)
  properties: dry mass 1 kg, wet mass 1 kg
- ash, from combustion of bagasse from sugarcane: -0.0623782 kg; lognormal variance with pedigree 0.0013, pedigree (2,2,1,1,1)
  properties: dry mass 1 kg, wet mass 1 kg
- bagasse, from sugarcane: -1.59454 kg
  properties: carbon content, non-fossil 0.443, dry mass 0.787 kg, heating value, net 15.4 MJ, price 0.01 EUR2005, water content 0.270648, wet mass 1 kg
- building, hall, steel construction: 7.09552e-7 m2; lognormal variance with pedigree 0.3028, pedigree (3,3,5,1,1)
- calcium chloride: 1.30799e-5 kg; lognormal variance with pedigree 0.0013, pedigree (2,2,4,1,1)
  properties: dry mass 1 kg, wet mass 1 kg
- chemical, inorganic: 5.80897e-6 kg; lognormal variance with pedigree 0.0013, pedigree (2,2,4,1,1)
  properties: carbon content, fossil 0.003, dry mass 1 kg, wet mass 1 kg
- chemical, organic: 1.18129e-6 kg; lognormal variance with pedigree 0.0013, pedigree (2,2,4,1,1)
  properties: carbon content, fossil 0.628, dry mass 1 kg, heating value, net 19.03 MJ, wet mass 1 kg
- concrete, normal strength: 3.39181e-6 m3; lognormal variance with pedigree 0.3028, pedigree (3,3,5,1,1)
  properties: dry mass 2190 kg, water content 0.086758, wet mass 2380 kg
- cyclohexane: 9.31774e-5 kg; lognormal variance with pedigree 0.0013, pedigree (2,2,4,1,1)
  properties: carbon content, fossil 0.857143, dry mass 1 kg, heating value, net 43.22 MJ, wet mass 1 kg
- dimethylamine: 1.01754e-5 kg; lognormal variance with pedigree 0.0013, pedigree (2,2,4,1,1)
  properties: carbon content, fossil 0.533333, dry mass 1 kg, heating value, net 13.47 MJ, wet mass 1 kg
- dithiocarbamate-compound: 1.83041e-5 kg; lognormal variance with pedigree 0.0013, pedigree (2,2,4,1,1)
  properties: carbon content, fossil 0.179339, dry mass 1 kg, wet mass 1 kg
- ethanol, without water, in 95% solution state, from fermentation: -0.467836 kg
  properties: carbon content, non-fossil 0.521739, dry mass 1 kg, heating value, net 28.1 MJ, price 0.324 EUR2005, wet mass 1 kg
- ethanol, without water, in 99.7% solution state, from fermentation: -0.350877 kg
  properties: carbon content, non-fossil 0.521739, dry mass 1 kg, heating value, net 28.1 MJ, price 0.436 EUR2005, wet mass 1 kg
- filter cake, from sugarcane juice filtration: -1.05653 kg; lognormal variance with pedigree 0.0013, pedigree (2,2,1,1,1)
  properties: carbon content, non-fossil 0.6514, dry mass 0.35 kg, price 0.03 EUR2005, water content 1.85714, wet mass 1 kg
- formaldehyde: 3.95712e-7 kg; lognormal variance with pedigree 0.0013, pedigree (2,2,4,1,1)
  properties: carbon content, fossil 0.4, dry mass 1 kg, heating value, net 20.19 MJ, wet mass 1 kg
- hydrochloric acid, without water, in 30% solution state: 2.16374e-6 kg; lognormal variance with pedigree 0.0013, pedigree (2,2,4,1,1)
  properties: dry mass 1 kg, heating value, net 3.32 MJ, wet mass 1 kg
- iron (III) chloride, without water, in 40% solution state: 0.000104678 kg; lognormal variance with pedigree 0.0013, pedigree (2,2,4,1,1)
  properties: dry mass 1 kg, wet mass 1 kg
- lubricating oil: 0.000253411 kg; lognormal variance with pedigree 0.0013, pedigree (2,2,4,1,1)
  properties: carbon content, fossil 0.75, dry mass 1 kg, heating value, net 40.2 MJ, wet mass 1 kg
- magnesium sulfate: 3.80117e-7 kg; lognormal variance with pedigree 0.0013, pedigree (2,2,4,1,1)
  properties: dry mass 1 kg, wet mass 1 kg
- metal working, average for chromium steel product manufacturing: 0.000147953 kg; lognormal variance with pedigree 0.3028, pedigree (3,3,5,1,1)
- metal working, average for steel product manufacturing: 0.00253411 kg; lognormal variance with pedigree 0.3028, pedigree (3,3,5,1,1)
- monoethanolamine: 3.60624e-6 kg; lognormal variance with pedigree 0.0013, pedigree (2,2,4,1,1)
  properties: carbon content, fossil 0.393443, dry mass 1 kg, heating value, net 25.8 MJ, wet mass 1 kg
- paraffin: 5.5692e-5 kg; lognormal variance with pedigree 0.0013, pedigree (2,2,4,1,1)
  properties: carbon content, fossil 0.847059, dry mass 1 kg, heating value, net 41.5 MJ, wet mass 1 kg
- pesticide, unspecified: 3.80117e-7 kg; lognormal variance with pedigree 0.0013, pedigree (2,2,4,1,1)
  properties: carbon content, fossil 0.486978, dry mass 1 kg, wet mass 1 kg
- phosphane: 6.47173e-6 kg; lognormal variance with pedigree 0.0013, pedigree (2,2,4,1,1)
  properties: dry mass 1 kg, wet mass 1 kg
- phosphoric acid, industrial grade, without water, in 85% solution state: 0.00460039 kg; lognormal variance with pedigree 0.0013, pedigree (2,2,4,1,1)
  properties: dry mass 1 kg, wet mass 1 kg
- quicklime, milled, packed: 0.0165692 kg; lognormal variance with pedigree 0.0013, pedigree (2,2,4,1,1)
  properties: dry mass 0.99 kg, water content 0.010101, wet mass 1 kg
- soda ash, dense: 0.000126901 kg; lognormal variance with pedigree 0.0013, pedigree (2,2,4,1,1)
  properties: carbon content, fossil 0.113208, dry mass 1 kg, heating value, net 3.43 MJ, wet mass 1 kg
- sodium dichromate: 1.14425e-5 kg; lognormal variance with pedigree 0.0013, pedigree (2,2,4,1,1)
  properties: dry mass 1 kg, wet mass 1 kg
- sodium hydroxide, without water, in 50% solution state: 6.53021e-6 kg; lognormal variance with pedigree 0.0013, pedigree (2,2,4,1,1)
  properties: dry mass 1 kg, heating value, net 3.03 MJ, wet mass 1 kg
- sodium hypochlorite, without water, in 15% solution state: 0.00132164 kg; lognormal variance with pedigree 0.0013, pedigree (2,2,4,1,1)
  properties: dry mass 1 kg, wet mass 1 kg
- sodium metasilicate pentahydrate, 58% active substance, powder: 7.36842e-6 kg; lognormal variance with pedigree 0.0013, pedigree (2,2,4,1,1)
  properties: dry mass 1 kg, heating value, net 5.71 MJ, wet mass 1 kg
- sodium sulfate, anhydrite: 0.00179532 kg; lognormal variance with pedigree 0.0013, pedigree (2,2,4,1,1)
  properties: dry mass 1 kg, wet mass 1 kg
- sugarcane: 19.4932 kg; lognormal variance with pedigree 0.0013, pedigree (2,2,4,1,1)
  properties: carbon content, non-fossil 0.533566, dry mass 0.255 kg, water content 2.9216, wet mass 1 kg
- sulfuric acid: 0.00719298 kg; lognormal variance with pedigree 0.0013, pedigree (2,2,4,1,1)
  properties: dry mass 1 kg, wet mass 1 kg
- vinasse, from fermentation of sugarcane: -9.93372 kg; lognormal variance with pedigree 0.0013, pedigree (2,2,1,1,1)
  properties: carbon content, non-fossil 0.1288, dry mass 0.0554348 kg, price 0.027 EUR2005, water content 17.0392, wet mass 1 kg

## Inputs from nature
- Occupation, industrial area [natural resource, land]: 6.35478e-5 m2*year; lognormal variance with pedigree 0.0428, pedigree (3,3,5,1,1)
- Transformation, from arable land, unspecified use [natural resource, land]: 1.24756e-6 m2; lognormal variance with pedigree 0.1228, pedigree (3,3,5,1,1)
- Transformation, to industrial area [natural resource, land]: 1.24756e-6 m2; lognormal variance with pedigree 0.1228, pedigree (3,3,5,1,1)
- Water, well, in ground [natural resource, in water]: 0.0292398 m3; lognormal variance with pedigree 0.0013, pedigree (2,2,4,1,1)

## Emissions to nature
- Carbon dioxide, non-fossil [air, non-urban air or from high stacks]: 4.47033 kg; lognormal variance with pedigree 0.0013, pedigree (2,2,4,1,1)
- Carbon monoxide, non-fossil [air, non-urban air or from high stacks]: 0.00142495 kg; lognormal variance with pedigree 0.0426, pedigree (3,3,4,1,1)
- Dinitrogen monoxide [air, non-urban air or from high stacks]: 7.83626e-5 kg; lognormal variance with pedigree 0.0426, pedigree (3,3,4,1,1)
- Ethanol [air, non-urban air or from high stacks]: 0.00158674 kg; lognormal variance with pedigree 0.0407, pedigree (2,2,4,1,1)
- Methane, non-fossil [air, non-urban air or from high stacks]: 0.000586745 kg; lognormal variance with pedigree 0.0426, pedigree (3,3,4,1,1)
- NMVOC, non-methane volatile organic compounds [air, non-urban air or from high stacks]: 9.90515e-5 kg; lognormal variance with pedigree 0.0426, pedigree (3,3,4,1,1)
- Nitrogen oxides [air, non-urban air or from high stacks]: 0.00141715 kg; lognormal variance with pedigree 0.0426, pedigree (3,3,4,1,1)
- Particulate Matter, < 2.5 um [air, non-urban air or from high stacks]: 0.000803119 kg; lognormal variance with pedigree 0.3026, pedigree (3,3,4,1,1)
- Particulate Matter, > 10 um [air, non-urban air or from high stacks]: 3.97661e-5 kg; lognormal variance with pedigree 0.0426, pedigree (3,3,4,1,1)
- Particulate Matter, > 2.5 um and < 10um [air, non-urban air or from high stacks]: 0.00160634 kg; lognormal variance with pedigree 0.1226, pedigree (3,3,4,1,1)
- Phosphoric acid [air, non-urban air or from high stacks]: 1.17739e-9 kg; lognormal variance with pedigree 0.0426, pedigree (3,3,4,1,1)
- Sulfur oxides [air, unspecified]: 7.60234e-5 kg; lognormal variance with pedigree 0.0426, pedigree (3,3,4,1,1)

## Sampling procedure
The main source of information on inputs and unit operation parameters is based on literature. These data were validated using computer process simulation to check mass and energy balances. Further information is obtained in Bonomi et al. (2016).

## Extrapolations
The dataset is extrapolated from a dataset in the geography of Brazil. It is considered that assumptions in the latter dataset are also valid for Colombia.More informaton on the documentation and assumptions employed, can be found in the respective Brazilian dataset.
Figures in the inventory represent average data for a traditional average-scale annexed plant.
