# cladding production, crossbar-pole, aluminium

Dataset: EcoSpold 2, unit process
Geography: RoW
Time period: 2005-01-01 to 2022-12-31
Technology level: current
Classification: EcoSpold01Categories: building components/cladding
Classification: ISIC rev.4 ecoinvent: 2511:Manufacture of structural metal products
Tags: ConvertedDataset
Scenario: Business-as-Usual
System model: Substitution, consequential, long-term
Generated by: Martin Lehmann
Published in: Kellenberger D. 2007
Database: ecoinvent
isCopyrightProtected: true
accessRestrictedTo: 1

## General comment
The data is calculated per 1 m2 of cladding. The aluminium cladding weighs 86.7 kg per m2.
[This dataset was already contained in the ecoinvent database version 2. It was not individually updated during the transfer to ecoinvent version 3. Life Cycle Impact Assessment results may still have changed, as they are affected by changes in the supply chain, i.e. in other datasets. This dataset was generated following the ecoinvent quality guidelines for version 2. It may have been subject to central changes described in the ecoinvent version 3 change report (http://www.ecoinvent.org/database/ecoinvent-version-3/reports-of-changes/), and the results of the central updates were reviewed extensively. The changes added e.g. consistent water flows and other information throughout the database. The documentation of this dataset can be found in the ecoinvent reports of version 2, which are still available via the ecoinvent website. The change report linked above covers all central changes that were made during the conversion process.]

## Included activities end
This dataset describes the processes and materials required to build 1m2 (visible area) of an aluminium cladding, type crossbar-pole. No transport activities between production and construction site are taken into account.

## Geography
Data based on a recently built official building in Switzerland.

## Technology
The technology represented in this dataset is mainly related to the production of the various parts integrated in the cladding construction.

## Reference product
- cladding, crossbar-pole, aluminium: 1 m2; By-product classification allocatable product; CPC 42190: Other structures (except prefabricated buildings) and parts of structures, of iron, steel or aluminium; plates[…]
  production volume 2.67763 m2
  properties: carbon allocation 2.46931 kg, carbon content 0.0284811, carbon content, fossil 0.0220902, carbon content, non-fossil 0.00639084, dry mass 86.7 kg, price 257 EUR2005, water content 0, water in wet mass 0 kg, wet mass 86.7 kg

## Inputs from technosphere
- adhesive, for metal: 0.0198 kg; lognormal variance with pedigree 0.014, pedigree (1,4,5,5,1)
  properties: carbon content, fossil 0.286533, dry mass 1 kg, heating value, net 8.68 MJ, wet mass 1 kg
- aluminium, wrought alloy: 3.82 kg; lognormal variance with pedigree 0.012, pedigree (1,1,5,5,1)
  properties: dry mass 1 kg, wet mass 1 kg
- electricity, medium voltage: 0.754762, 0.0282395, 0.358793, 6.22729, 0.522891, 0.0280266 kWh (6 suppliers, which the file names only by identifier); sum of these 7.92 kWh; lognormal variance with pedigree 0.012, pedigree (1,1,5,5,1)
- extrusion, plastic film: 0.723 kg; lognormal variance with pedigree 0.014, pedigree (1,4,5,5,1)
- glass fibre reinforced plastic, polyamide, injection moulded: 0.152 kg; lognormal variance with pedigree 0.012, pedigree (1,1,5,5,1)
  properties: carbon content, fossil 0.446018, dry mass 1 kg, wet mass 1 kg
- glass wool mat: 0.472 kg; lognormal variance with pedigree 0.014, pedigree (1,4,5,5,1)
  properties: carbon content, fossil 0.0107327, dry mass 1 kg, wet mass 1 kg
- glazing, triple, U<0.5 W/m2K: 0.688 m2; lognormal variance with pedigree 0.014, pedigree (1,4,5,5,1)
  properties: carbon content, fossil 0.00372354, dry mass 31.9272 kg, wet mass 31.9272 kg
- metal working factory: 3.96e-8 unit; lognormal variance with pedigree 0.3146, pedigree (2,4,5,5,1)
- plywood: 0.00136 m3; lognormal variance with pedigree 0.014, pedigree (1,4,5,5,1)
  properties: carbon content, fossil 0.09783, carbon content, non-fossil 0.409818, dry mass 768.6 kg, heating value, net 11688.9 MJ, price 400 EUR2005, water content 0.070778, wet mass 823 kg
- polystyrene, extruded: 0.0202 kg; lognormal variance with pedigree 0.014, pedigree (1,4,5,5,1)
  properties: carbon content, fossil 0.873427, dry mass 1 kg, heating value, net 38.67 MJ, wet mass 1 kg
- polyurethane, rigid foam: 0.148 kg; lognormal variance with pedigree 0.012, pedigree (1,1,5,5,1)
  properties: carbon content, fossil 0.69089, dry mass 1 kg, heating value, net 30.67 MJ, wet mass 1 kg
- polyvinylchloride, emulsion polymerised: 0.0922982 kg; lognormal variance with pedigree 0.014, pedigree (1,4,5,5,1)
  properties: carbon content, fossil 0.387097, dry mass 1 kg, heating value, net 21.5 MJ, wet mass 1 kg
- polyvinylchloride, suspension polymerised: 0.630702 kg; lognormal variance with pedigree 0.014, pedigree (1,4,5,5,1)
  properties: carbon content, fossil 0.387097, dry mass 1 kg, heating value, net 21.5 MJ, wet mass 1 kg
- powder coat, aluminium sheet: 0.808 m2; lognormal variance with pedigree 0.012, pedigree (1,1,5,5,1)
- powder coat, steel: 0.886 m2; lognormal variance with pedigree 0.014, pedigree (1,4,5,5,1)
- reinforcing steel: 24.1 kg; lognormal variance with pedigree 0.014, pedigree (1,4,5,5,1)
  properties: carbon content, fossil 0.004, dry mass 1 kg, wet mass 1 kg
- sawnwood, hardwood, dried (u=20%), planed: 0.000279 m3; lognormal variance with pedigree 0.014, pedigree (1,4,5,5,1)
  properties: carbon content, non-fossil 0.494, dry mass 650 kg, heating value, net 8626.13 MJ, water content 0.1, wet mass 715 kg
- seal, natural rubber based: 0.141 kg; lognormal variance with pedigree 0.012, pedigree (1,1,5,5,1)
  properties: carbon content, non-fossil 0.881625, dry mass 1 kg, heating value, net 26.71 MJ, wet mass 1 kg
- section bar extrusion, aluminium: 3.82 kg; lognormal variance with pedigree 0.012, pedigree (1,1,5,5,1)
- section bar rolling, steel: 25 kg; lognormal variance with pedigree 0.012, pedigree (1,1,5,5,1)
- sheet rolling, steel: 1.22 kg; lognormal variance with pedigree 0.014, pedigree (1,4,5,5,1)
- steel, chromium steel 18/8, hot rolled: 1.09 kg; lognormal variance with pedigree 0.012, pedigree (1,1,5,5,1)
  properties: carbon content, fossil 0.0008, dry mass 1 kg, wet mass 1 kg
- steel, low-alloyed, hot rolled: 1.22 kg; lognormal variance with pedigree 0.014, pedigree (1,4,5,5,1)
  properties: carbon content, fossil 0.005, dry mass 1 kg, wet mass 1 kg
- stone wool: 0.72 kg; lognormal variance with pedigree 0.014, pedigree (1,4,5,5,1)
  properties: carbon content, fossil 0.015401, dry mass 1 kg, wet mass 1 kg
- synthetic rubber: 1.37 kg; lognormal variance with pedigree 0.012, pedigree (1,1,5,5,1)
  properties: carbon content, fossil 0.871949, dry mass 1 kg, heating value, net 26.42 MJ, wet mass 1 kg
- used triple glazing, U<0.5W/m2K: -0.0135 m2; lognormal variance with pedigree 0.014, pedigree (1,4,1,5,1)
  properties: carbon content, fossil 0.00372354, dry mass 31.9272 kg, wet mass 31.9272 kg
- waste mineral wool, for final disposal: -0.0234 kg; lognormal variance with pedigree 0.014, pedigree (1,4,1,5,1)
  properties: dry mass 1 kg, wet mass 1 kg
- waste plastic, mixture: -0.0044609, -0.0312288, -0.000116904, -0.000123109, -2.25418e-5, -0.00029806, -4.97348e-5 kg (7 suppliers, which the file names only by identifier); sum of these -0.0363 kg; lognormal variance with pedigree 0.014, pedigree (1,4,1,5,1)
  properties: carbon content, fossil 0.747344, dry mass 0.847 kg, heating value, net 30.79 MJ, water content 0.180638, wet mass 1 kg
- waste wood, untreated: -7.18538e-5, -0.0013638, -0.0180934, -0.000169336, -0.000113595, -0.000475613, -1.23804e-5 kg (7 suppliers, which the file names only by identifier); sum of these -0.0203 kg; lognormal variance with pedigree 0.014, pedigree (1,4,1,5,1)
  properties: carbon content, non-fossil 0.48632, dry mass 0.8 kg, heating value, net 13.99 MJ, water content 0.25, wet mass 1 kg
- zinc coat, coils: 0.156 m2; lognormal variance with pedigree 0.014, pedigree (1,4,5,5,1)

## Sampling procedure
Company documentation

## Extrapolations
see Geography This dataset has been copied from an original dataset covering the geography RER. The uncertainty has been adjusted accordingly.

## Review by Rolf Frischknecht 2007-11-07
passed
