# tantalum mine operation and beneficiation

Dataset: EcoSpold 2, unit process
Geography: RoW
Time period: 2019-01-01 to 2023-12-31
Technology level: current
Classification: ISIC rev.4 ecoinvent: 0729:Mining of other non-ferrous metal ores
Scenario: Business-as-Usual
System model: Substitution, consequential, long-term
Generated by: Efstathios Kakkos
Published in: Classen M. 2009
Database: ecoinvent
isCopyrightProtected: true
accessRestrictedTo: 1

## General comment
This dataset refers to the global average mining and beneficiation activities in order to produce 1 kg of tantalum concentrate (30% Ta2O5). Congo and Rwanda are the two major producers of tantalum con-centrate, being responsible for approximately 62% of the global mine production (Source: https://pubs.usgs.gov/periodicals/mcs2020/mcs2020-tantalum.pdf). This dataset is a disaggregation of the activity ''tantalum production, powder, capacitor-grade'' as found in version 3.7 of the Ecoinvent da-tabase that produces tantalum powder from tantalite ore and has been copied from an original dataset covering the geography GLO, due to absence of regionalized dataset.
Specific values (such as i) average ore grade for the GLO geography -0.03% instead of 0.0194% Ta2O5 - and consequently the amount of extracted ore from the ground, ii) the ore grade of the concentrate from 38% to 30% to represent today's situation as the grade of the concentrate 20-40 years ago was 40-45%) were changed to provide a more representative picture of the today's tantalum concentrate production. Furthermore, values such as electricity, water and diesel consumption were scaled based on the new amount of ore extracted from ground (approximately 1370 kg) and grade of the final concen-trate to ensure better representativeness (for more information consult the sampling procedure and the respective exchanges comments). The average global ore grade of tantalite ore ranges between 0.02%-0.04% Ta2O5 (Source: Mancheri et al (2018)).
The original data are based on the Grenbushes and Wodgina mines in Western Australia, which at the time was the major producer of tantalum (55-60% of the global tantalum production). The original data and their underlying assumptions can be found in chapter 5.1.2, tables 5.2 & 5.3, part XI of the Classen et al (2009) report. Only production from tantalite ore and through open-pit mining is considered here, meaning that mining of tantalum from other ores (such as pyrochlore) or through other mining techniques (such artisanal mining) are not taken into account.
Reference 1: Classen M., Althaus H.-J., Blaser S.,Tuchschmid M., Jungbluth N., Doka G., Faist Emmeneg-ger M. and Scharnhorst W. (2009) Life Cycle lnventories of Metals. Final report ecoinvent data v2.1, No 10. EMPA Dübendorf, Swiss Centre for Life Cycle lnventories, Dübendorf , CH, Online-Version under: www .ecoinvent.ch.
Reference 2: Mancheri, N. A., Sprecher, B., Deetman, S., Young, S. B., Bleischwitz, R., Dong, L., . . . Tukker, A. (2018). Resilience in the tantalum supply chain. Resources, Conservation and Re-cycling, 129, 56-69. doi:https://doi.org/10.1016/j.resconrec.2017.10.018). The average grade of 0.03% Ta2O5 has been con-sidered here.

## Included activities start
The activities start with the mining of the tantalum ore.

## Included activities end
The activities end with the production of tantalum concentrate (30% beneficiated).

## Allocation
No allocation is applied.

## Geography
Dataset considered valid for the entire corresponding region.

## Technology
At first, the tantalum minerals are extracted from the ground through open-pit mining. Standard pro-cess include drilling, blasting, and muck cycles prior to the beneficiation of the tantalum ore. After min-ing, tantalite ores are almost exclusively concentrated through wet gravity concentration, utilizing equipment such as jigs, spirals and tables, in order to produce low- to medium-grade concentrate. Centrifugal type concentrators could be used in the future to recover even finer tantalum particles, but there is no indication that the industry is moving towards that direction. The low- to medium-grade concentrates are further beneficiated in dry plants, where dry gravity concentrators, magnetic and elec-trostatic concentrators are used and sulfides are ocassionally removed by flotation. The tantalum con-tent of the resulting concentrate is usually between 25-35% (Source: Rob-ert Linnen, D.L. Trueman, Richard BurtTantalum and niobium Gunn, Gus (Eds.), 2014, Critical Metals Handbook: British Geological Survey (2014), pp. 361-384) or 20-40% Ta2O5 (according to figure 15.6 of the same source), which is lower than the required grade in the past (45-50% % Ta2O5). In general, concentrates from central Africa have higher Ta2O5 grades than those produced in Canada, Brazil or Australia. However due to lack of data it is assumed that the average grade of Ta2O5 is 30%.

## Time period
Data are considered representative of current production practices.

## Reference product
- tantalum concentrate, 30% Ta2O5: 1 kg; By-product classification allocatable product; CPC 41601: Tungsten, molybdenum, tantalum, magnesium, cobalt, cadmium, titanium, zirconium, beryllium, gallium, hafnium, […]
  production volume 2.8083e6 kg
  properties: carbon allocation 0 kg, carbon content 0, carbon content, fossil 0, carbon content, non-fossil 0, dry mass 1 kg, oxygen content 0.0543, price 8.38067 EUR2005, tantalum content 0.2457, water content 0, water in wet mass 0 kg, wet mass 1 kg

## Inputs from technosphere
- conveyor belt: 0.000103709 m; lognormal variance with pedigree 0.3952, pedigree (2,4,5,5,2)
- diesel, burned in building machine: 160.655 MJ; lognormal variance with pedigree 0.0452, pedigree (2,4,5,5,2)
  properties: heating value, net 1 MJ
- electricity, medium voltage: 0.0276337, 0.0100953, 0.00544965, 0.000756989, 0.00186402, 2.57785, 0.0198543, 0.477359, 0.0964507, 0.00280103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 kWh (36 suppliers, which the file names only by identifier); sum of these 30.1384 kWh; lognormal variance with pedigree 0.0452, pedigree (2,4,5,5,2)
- mine infrastructure, open cast, non-ferrous metal: 6.85e-8 unit; lognormal variance with pedigree 0.3952, pedigree (2,4,5,5,2)
- non-sulfidic tailing, off-site: -1955.54 kg; lognormal variance with pedigree 0.0472, pedigree (3,4,5,5,2)
  properties: dry mass 0.7 kg, water content 0.428571, wet mass 1 kg
- wastewater, average: -0.0634915, -0.00159564, -0.265521, -0.000945356 m3 (4 suppliers, which the file names only by identifier); sum of these -0.331554 m3; lognormal variance with pedigree 0.0472, pedigree (3,4,5,5,2)
  properties: carbon content, non-fossil 0.194039, dry mass 0.346837 kg, water content 2882.2, wet mass 1000 kg

## Inputs from nature
- Gangue [natural resource, in ground]: 1369.66 kg; lognormal variance with pedigree 0.0458, pedigree (2,4,5,5,2)
- Occupation, mineral extraction site [natural resource, land]: 5.37725 m2*year; lognormal variance with pedigree 0.0952, pedigree (2,4,5,5,2)
- Tantalum [natural resource, in ground]: 0.370494 kg; lognormal variance with pedigree 0.0452, pedigree (2,4,5,5,2)
- Transformation, from mineral extraction site [natural resource, land]: 0.107545 m2; lognormal variance with pedigree 0.1752, pedigree (2,4,5,5,2)
- Transformation, from unspecified [natural resource, land]: 0.107545 m2; lognormal variance with pedigree 0.1752, pedigree (2,4,5,5,2)
- Transformation, to mineral extraction site [natural resource, land]: 0.107545 m2; lognormal variance with pedigree 0.1752, pedigree (2,4,5,5,2)
- Transformation, to unspecified [natural resource, land]: 0.107545 m2; lognormal variance with pedigree 0.1752, pedigree (2,4,5,5,2)
- Water, river [natural resource, in water]: 0.918203 m3; lognormal variance with pedigree 0.0452, pedigree (2,4,5,5,2)

## Emissions to nature
- Particulate Matter, < 2.5 um [air, non-urban air or from high stacks]: 0.00685 kg; lognormal variance with pedigree 0.1752, pedigree (2,4,5,5,2)
- Particulate Matter, > 10 um [air, non-urban air or from high stacks]: 0.0708564 kg; lognormal variance with pedigree 0.3652, pedigree (2,4,5,5,2)
- Particulate Matter, > 2.5 um and < 10um [air, non-urban air or from high stacks]: 0.06165 kg; lognormal variance with pedigree 0.1052, pedigree (2,4,5,5,2)

## Sampling procedure
This dataset refers to the global average mining and beneficiation activities in order to produce 1 kg of tantalum concentrate (30% Ta2O5). Congo and Rwanda are the two major producers of tantalum concentrate, being responsible for approximately 62% of the global mine production (Source: https://pubs.usgs.gov/periodicals/mcs2020/mcs2020-tantalum.pdf). This dataset is a disaggregation of the activity ''tantalum production, powder, capacitor-grade'' as found in version 3.7 of the Ecoinvent database that produces tantalum powder from tantalite ore and has been copied from an original dataset covering the geography GLO, due to absence of regionalized dataset.

Specific values (such as i) average ore grade for the GLO geography -0.03% instead of 0.0194% Ta2O5 - and consequently the amount of extracted ore from the ground, ii) the ore grade of the concentrate from 38% to 30% to represent today's situation as the grade of the concentrate 20-40 years ago was 40-45%) were changed to provide a more representative picture of the today's tantalum concentrate production. Furthermore, values such as electricity, water and diesel consumption were scaled based on the new amount of ore extracted from ground (approximately 1370 kg) and grade of the final concentrate to ensure better representativeness (for more information consult the sampling procedure and the respective exchanges comments). The average global ore grade of tantalite ore ranges between 0.02%-0.04% Ta2O5 (Source: Mancheri et al (2018)).

The original data are based on the Grenbushes and Wodgina mines in Western Australia, which at the time was the major producer of tantalum (55-60% of the global tantalum production). The original data and their underlying assumptions can be found in chapter 5.1.2, tables 5.2 & 5.3, part XI of the Classen et al (2009) report. Only production from tantalite ore and through open-pit mining is considered here, meaning that mining of tantalum from other ores (such as pyrochlore) or through other mining techniques (such artisanal mining) are not taken into account.

Reference 1: Classen M., Althaus H.-J., Blaser S.,Tuchschmid M., Jungbluth N., Doka G., Faist Emmenegger M. and Scharnhorst W. (2009) Life Cycle lnventories of Metals. Final report ecoinvent data v2.1, No 10. EMPA Dübendorf, Swiss Centre for Life Cycle lnventories, Dübendorf , CH, Online-Version under: www .ecoinvent.ch.

Reference 2: Mancheri, N. A., Sprecher, B., Deetman, S., Young, S. B., Bleischwitz, R., Dong, L., . . . Tukker, A. (2018). Resilience in the tantalum supply chain. Resources, Conservation and Re-cycling, 129, 56-69. doi:https://doi.org/10.1016/j.resconrec.2017.10.018). The average grade of 0.03% Ta2O5 has been con-sidered here.

## Extrapolations
This dataset is meant to be a global average representation, based on data of one company and some approximations (see sampling procedure). Uncertainty has been adjusted accordingly for the global dataset.

## Review by Carl Vadenbo 2021-02-23
The issues raised in the first round of cross-cutting review have been addressed satisfactorily.
Please consider rephrasing the opening statement of the General Comment, instead starting with: "This dataset represents the production of [insert amount and unit of reference product] of [insert name of reference product] from [insert main raw material input and/or production route".
