# tap water production, direct filtration treatment

Dataset: EcoSpold 2, unit process
Geography: RoW
Time period: 2012-01-01 to 2022-12-31
Technology level: current
Classification: ISIC rev.4 ecoinvent: 3600:Water collection, treatment and supply
Classification: EcoSpold01Categories: water supply/production
Synonyms: potable water
Scenario: Business-as-Usual
System model: Substitution, consequential, long-term
Generated by: Marylène Dussault
Database: ecoinvent
isCopyrightProtected: true
accessRestrictedTo: 1

## General comment
This dataset represents production of 1 kg of tap water under pressure at facility gate, ready for distribution in network. It represents average operation of direct filtration treatment for production of tap water. Direct filtration treatment includes sand filtration and disinfection. Inventory was constructed from reported chemicals, energy inputs and wastes from 2 distinct direct filtration plants located in Québec covering nearly 100% of total production of tap water from this technology.
[This dataset is meant to replace the following datasets:
- tap water production and supply, GLO, 2000 - 2000]

## Included activities start
From the intake pumping of raw surface water into the water treatment plant.

## Included activities end
This dataset ends with the production of tap water, at facility gate, under pressure. It includes energy for intake pumping, treatment system, lighting and heating of the building as well as the energy of the pump pressurizing water to the beginning of the network. It includes all chemicals and material added to the water during treatment and, when needed, ultraviolent lamps for replacement. It excludes energy for pumping stations and water losses within the network which is included in the tap water market. Emissions to the environment occurring during the treatment and during the distribution were not considered as they are assumed negligible. Main substance in water that would be released in the environment are assumed to be considered in wastewater processes.

## Geography
Extrapolated from data from two plants in Quebec (Canada).The uncertainty was adjusted accordingly.

## Time period
Time of publication.

## Parameters
- unit conversion, days in a year: 365.25 d/year; name days_per_year; lognormal variance with pedigree 0.0006, pedigree (1,1,1,1,1)
  Conversion factor.

## Reference product
- tap water: 1 kg; By-product classification allocatable product; CPC 18000: Natural water
  production volume 3.16098e13 kg
  properties: carbon allocation 6.08566e-7 kg, carbon content 0.0017899, carbon content, fossil 0.0017899, carbon content, non-fossil 0, dry mass 0.00034 kg, price 0.000397 EUR2005, water content 2940.18, water in wet mass 0.99966 kg, wet mass 1 kg

## Inputs from technosphere
- chlorine, liquid: 3.20892e-6 kg; lognormal variance with pedigree 0.0033, pedigree (2,2,4,5,1)
  properties: dry mass 1 kg, wet mass 1 kg
- diesel, burned in building machine: 6.6407e-6 MJ; lognormal variance with pedigree 0, pedigree (1,1,4,1,1)
  properties: density 0.84 kg/l, fuel input in physical units, L 1.83e-7 l, heating value, net 1 MJ
- electricity, medium voltage: 4.39687e-6, 4.35262e-7, 8.35545e-6, 4.99303e-6, 5.11023e-7, 0.000125293, 1.00544e-7, 4.79192e-7, 7.44773e-6, 5.62666e-7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 kWh (65 suppliers, which the file names only by identifier); sum of these 0.000286 kWh; lognormal variance with pedigree 0.0033, pedigree (2,2,4,5,1)
- heat, district or industrial, natural gas: 1.16044e-6 MJ; lognormal variance with pedigree 0, pedigree (1,1,4,1,1)
  properties: Corresponding fuel use 1.11 MJ, fuel input in physical units, m3 2.88e-8 m3, heating value, net 1 MJ
- wastewater, unpolluted: -1.28461e-5 m3; lognormal variance with pedigree 0.0033, pedigree (2,2,1,5,1)
  properties: carbon content, fossil 0.00178991, carbon content, non-fossil 0.00178991, dry mass 0.337476 kg, water content 2962.17, wet mass 1000 kg
- water works, capacity 1.1E10l/year: 1.52103e-12 unit; lognormal variance with pedigree 0, pedigree (1,1,4,1,1)
  properties: lifetime 60 year, plant average daily flow rate 30000 m3/d

## Inputs from nature
- Water, river [natural resource, in water]: 0.00101285 m3; lognormal variance with pedigree 0.0033, pedigree (2,2,4,5,1)

## Sampling procedure
Based on data collected from two direct filtration treatment plants in Quebec (Canada). See corresponding Quebec dataset for more information. Note that percent representativeness is not supplied because technology-specific global production volumes is too uncertain. Should this information become available, the representativeness can be calculated by dividing the sum of the water treated by the Quebec plants that served as a basis for the Global dataset by the technology-specific global production volume. (5.73E11 kg/a)

## Extrapolations
From two direct filtration tap water production facilities in Quebec (Canada) to global average of same technology. The uncertainty has been changed accordingly.
