# stibnite mine operation and beneficiation

Dataset: EcoSpold 2, unit process
Geography: CA-QC
Time period: 1994-01-01 to 2022-12-31
Technology level: current
Classification: ISIC rev.4 ecoinvent: 0729:Mining of other non-ferrous metal ores
Scenario: Business-as-Usual
System model: Substitution, consequential, long-term
Generated by: Pascal Lesage
Published in: Classen M. 2008
Database: ecoinvent
isCopyrightProtected: true
accessRestrictedTo: 1

## General comment
The dataset exchanges are identical to the CN dataset. Created to enable linking to regional markets (e.g. electricity). Data quality indicators adjusted accordingly.
The original CN dataset represents mining and beneficiation of Stibnite and the production of stibnite concentrate from it in China. Stibnite is the main source for antimony production. 60% of globally mined antimony is mined in China and with their import surtplus, over 80% of the global Antimony is produced there.
Due to lack of information about the mining of stibnite, this dataset is mainly approximated with data from the mining and beneficiation of molybdenite from coupled production with copper (Classen et al., 2009). This dataset should not be used if its relative importance is high in the product system that is modelled. For more details about the origin of the data, refer to the Sampling Procedure and exchange comments.

## Included activities start
This activity starts with the extraction of stibnite ore from the ground.

## Included activities end
The activity includes the mining and the beneficiation step with the mining infrastructure and disposal of overburden and tailings.

## Geography
The dataset exchanges are identical to CN dataset. Created to enable linking to regional markets (e.g. for electricity). Data quality indicators adjusted accordingly

## Technology
This dataset is approximated with values from molybdenum mining and beneficiation (coupled with copper mining). See Classen et al (2009) Part XVI.

## Parameters
- fraction, process water, to air: 0.2 dimensionless; lognormal variance with pedigree 0.092025, pedigree (5,5,5,5,5)

## Reference product
- stibnite concentrate: 1 kg; By-product classification allocatable product; CPC 14290: Other non-ferrous metal ores and concentrates (other than uranium or thorium ores and concentrates)
  production volume 3000 kg
  properties: antimony content 0.2683, carbon allocation 0 kg, carbon content 0, carbon content, fossil 0, carbon content, non-fossil 0, dry mass 1 kg, price 0.92 EUR2005, water content 0, water in wet mass 0 kg, wet mass 1 kg

## Inputs from technosphere
- aluminium hydroxide factory: 1.3197e-9 unit; lognormal variance with pedigree 0.3223, pedigree (5,5,5,5,5)
- blasting: 0.15708 kg; lognormal variance with pedigree 0.0029, pedigree (5,5,5,5,5)
- chemical, inorganic: 0.12088 kg; lognormal variance with pedigree 0.122, pedigree (5,5,5,5,5)
  properties: carbon content, fossil 0.003, dry mass 1 kg, wet mass 1 kg
- chemical, organic: 0.035445 kg; lognormal variance with pedigree 0.122, pedigree (5,5,5,5,5)
  properties: carbon content, fossil 0.628, dry mass 1 kg, wet mass 1 kg
- conveyor belt: 1.1912e-5 m; lognormal variance with pedigree 0.408, pedigree (5,5,5,5,5)
- diesel, burned in building machine: 0.0079416 MJ; lognormal variance with pedigree 0.0029, pedigree (5,5,5,5,5)
- electricity, medium voltage: 3.9825 kWh; lognormal variance with pedigree 0.0034, pedigree (5,5,5,5,5)
- limestone, crushed, washed: 0.19796 kg; lognormal variance with pedigree 0.002, pedigree (5,5,5,5,5)
  properties: carbon content, fossil 0.117257, dry mass 0.998 kg, water content 0.00200401, wet mass 1 kg
- mine infrastructure, open cast, non-ferrous metal: 1.7285e-9 unit; lognormal variance with pedigree 0.408, pedigree (5,5,5,5,5)
- mine infrastructure, underground, non-ferrous metal: 7.5328e-10 unit; lognormal variance with pedigree 0.408, pedigree (5,5,5,5,5)
- sodium cyanide: 0.0054949 kg; lognormal variance with pedigree 0.122, pedigree (5,5,5,5,5)
  properties: carbon content, fossil 0.244898, dry mass 1 kg, wet mass 1 kg
- steel, chromium steel 18/8, hot rolled: 0.11679 kg; lognormal variance with pedigree 0.012, pedigree (5,5,5,5,5)
  properties: carbon content, fossil 0.0008, dry mass 1 kg, wet mass 1 kg
- sulfidic tailings, generic: -3.44577 kg; lognormal variance with pedigree 0.0407, pedigree (2,2,1,5,4)
  properties: aluminium content 0.014738, antimony content 0.02, calcium content 0.0045972, carbon content, fossil 0.0087785, dry mass 0.7 kg, iron content 0.015374, magnesium content 0.0022359, oxygen content 0.89157, potassium content 0.0025181, silicon content 0.053273, water content 0.428571, wet mass 1 kg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

## Inputs from nature
- Antimony [natural resource, in ground]: 0.316541 kg; lognormal variance with pedigree 0.1221, pedigree (3,2,2,5,5)
- Gangue [natural resource, in ground]: 3.91082 kg; lognormal variance with pedigree 0.1227, pedigree (3,2,2,5,5)
- Occupation, mineral extraction site [natural resource, land]: 0.0081752 m2*year; lognormal variance with pedigree 0.0429, pedigree (5,5,5,5,5)
- Transformation, from unspecified [natural resource, land]: 0.00027328 m2; lognormal variance with pedigree 0.1229, pedigree (5,5,5,5,5)
- Transformation, to mineral extraction site [natural resource, land]: 0.00027328 m2; lognormal variance with pedigree 0.1229, pedigree (5,5,5,5,5)
- Water, river [natural resource, in water]: 0.23182 m3; lognormal variance with pedigree 0.0027, pedigree (5,5,5,5,5)

## Emissions to nature
- Antimony ion [air, non-urban air or from high stacks]: 1.4423e-8 kg; lognormal variance with pedigree 0.0621, pedigree (5,5,5,5,5)
- Arsenic ion [air, non-urban air or from high stacks]: 1.0861e-7 kg; lognormal variance with pedigree 0.0621, pedigree (5,5,5,5,5)
- Beryllium II [air, non-urban air or from high stacks]: 1.8803e-7 kg; lognormal variance with pedigree 0.0621, pedigree (5,5,5,5,5)
- Boron [air, non-urban air or from high stacks]: 7.2409e-7 kg; lognormal variance with pedigree 0.0621, pedigree (5,5,5,5,5)
- Cadmium II [air, non-urban air or from high stacks]: 7.9416e-9 kg; lognormal variance with pedigree 0.0621, pedigree (5,5,5,5,5)
- Carbon dioxide, fossil [air, non-urban air or from high stacks]: 0.087007 kg; lognormal variance with pedigree 0.2946, pedigree (5,5,5,5,5)
- Carbon disulfide [air, non-urban air or from high stacks]: 0.015708 kg; lognormal variance with pedigree 0.2103, pedigree (5,5,5,5,5)
- Chromium III [air, non-urban air or from high stacks]: 7.2409e-6 kg; lognormal variance with pedigree 0.0621, pedigree (5,5,5,5,5)
- Cobalt II [air, non-urban air or from high stacks]: 1.4423e-6 kg; lognormal variance with pedigree 0.0621, pedigree (5,5,5,5,5)
- Copper ion [air, non-urban air or from high stacks]: 3.6146e-6 kg; lognormal variance with pedigree 0.0621, pedigree (5,5,5,5,5)
- Fluorine [air, non-urban air or from high stacks]: 6.8905e-5 kg; lognormal variance with pedigree 0.0621, pedigree (5,5,5,5,5)
- Lead II [air, non-urban air or from high stacks]: 1.0102e-6 kg; lognormal variance with pedigree 0.0621, pedigree (5,5,5,5,5)
- Manganese II [air, non-urban air or from high stacks]: 6.8905e-5 kg; lognormal variance with pedigree 0.0621, pedigree (5,5,5,5,5)
- Mercury II [air, non-urban air or from high stacks]: 3.6146e-9 kg; lognormal variance with pedigree 0.0621, pedigree (5,5,5,5,5)
- Nickel II [air, non-urban air or from high stacks]: 5.781e-6 kg; lognormal variance with pedigree 0.0621, pedigree (5,5,5,5,5)
- Particulate Matter, < 2.5 um [air, non-urban air or from high stacks]: 0.03673 kg; lognormal variance with pedigree 0.3341, pedigree (5,5,5,5,5)
- Particulate Matter, > 10 um [air, non-urban air or from high stacks]: 0.0035504 kg; lognormal variance with pedigree 0.3341, pedigree (5,5,5,5,5)
- Particulate Matter, > 2.5 um and < 10um [air, non-urban air or from high stacks]: 0.031942 kg; lognormal variance with pedigree 0.5141, pedigree (5,5,5,5,5)
- Selenium IV [air, non-urban air or from high stacks]: 3.6146e-9 kg; lognormal variance with pedigree 0.0621, pedigree (5,5,5,5,5)
- Water [air, unspecified]: 0.046364 m3; lognormal variance with pedigree 0.0427, pedigree (5,5,5,5,5)
- Zinc II [air, non-urban air or from high stacks]: 1.3723e-5 kg; lognormal variance with pedigree 0.0621, pedigree (5,5,5,5,5)
- Aluminium III [water, surface water]: 2.0029e-5 kg; lognormal variance with pedigree 1.332, pedigree (5,5,5,5,5)
- Arsenic ion [water, surface water]: 6.8321e-7 kg; lognormal variance with pedigree 1.332, pedigree (5,5,5,5,5)
- BOD5, Biological Oxygen Demand [water, surface water]: 0.0024175 kg; lognormal variance with pedigree 1.332, pedigree (5,5,5,5,5)
- COD, Chemical Oxygen Demand [water, surface water]: 0.0024175 kg; lognormal variance with pedigree 1.332, pedigree (5,5,5,5,5)
- Cadmium II [water, surface water]: 7.3577e-8 kg; lognormal variance with pedigree 1.332, pedigree (5,5,5,5,5)
- Calcium II [water, surface water]: 0.15883 kg; lognormal variance with pedigree 1.332, pedigree (5,5,5,5,5)
- Chromium III [water, surface water]: 1.2672e-7 kg; lognormal variance with pedigree 1.332, pedigree (5,5,5,5,5)
- Cobalt II [water, surface water]: 1.8102e-7 kg; lognormal variance with pedigree 1.332, pedigree (5,5,5,5,5)
- Copper ion [water, surface water]: 1.8336e-6 kg; lognormal variance with pedigree 1.332, pedigree (5,5,5,5,5)
- Cyanide [water, surface water]: 0.0006073 kg; lognormal variance with pedigree 0.1303, pedigree (5,5,5,5,5)
- DOC, Dissolved Organic Carbon [water, surface water]: 0.00094599 kg; lognormal variance with pedigree 1.332, pedigree (5,5,5,5,5)
- Dissolved solids [water, surface water]: 0.0011971 kg; lognormal variance with pedigree 1.332, pedigree (5,5,5,5,5)
- Iron ion [water, surface water]: 6.7153e-5 kg; lognormal variance with pedigree 1.332, pedigree (5,5,5,5,5)
- Lead II [water, surface water]: 6.4818e-7 kg; lognormal variance with pedigree 1.332, pedigree (5,5,5,5,5)
- Manganese II [water, surface water]: 5.7226e-6 kg; lognormal variance with pedigree 1.332, pedigree (5,5,5,5,5)
- Mercury II [water, surface water]: 8.7591e-9 kg; lognormal variance with pedigree 1.332, pedigree (5,5,5,5,5)
- Nickel II [water, surface water]: 5.6467e-6 kg; lognormal variance with pedigree 1.332, pedigree (5,5,5,5,5)
- Nitrogen, organic bound [water, surface water]: 0.0052788 kg; lognormal variance with pedigree 1.332, pedigree (5,5,5,5,5)
- Sulfate [water, surface water]: 0.54657 kg; lognormal variance with pedigree 1.332, pedigree (5,5,5,5,5)
- TOC, Total Organic Carbon [water, surface water]: 0.00094599 kg; lognormal variance with pedigree 1.332, pedigree (5,5,5,5,5)
- Water [water, unspecified]: 0.185456 m3; lognormal variance with pedigree 0.0427, pedigree (5,5,5,5,5)
- Zinc II [water, surface water]: 1.7577e-5 kg; lognormal variance with pedigree 1.332, pedigree (5,5,5,5,5)

## Sampling procedure
Data retrieved from:
Classen M., Althaus H.-J., Blaser S., Doka G., Jungbluth N., Tuchschmid M. (2009) Life Cycle Inventories of Metals, Final report ecoinvent data v2.1, 10, Dübendorf, CH, Swiss Centre for LCI, Empa - TSL, 3 - SeparatePublication, CD-ROM

Jianwen Chu, Jiansu Mao, Mengchang He (2019). Anthropogenic antimony flow analysis and evaluation in China. Science of The Total Environment, Volume 683. https://doi.org/10.1016/j.scitotenv.2019.05.293

## Extrapolations
Dataset created using identical exchanges to CN dataset. Created to enable linking to regional markets (e.g. electricity). Data quality indicators adjusted accordingly.
