# water pump operation, electric

Dataset: EcoSpold 2, unit process
Geography: RoW
Time period: 2018-01-01 to 2022-12-31
Technology level: current
Classification: ISIC rev.4 ecoinvent: 0161:Support activities for crop production
Scenario: Business-as-Usual
System model: Substitution, consequential, long-term
Generated by: David FitzGerald
Database: ecoinvent
isCopyrightProtected: true
accessRestrictedTo: 1

## General comment
This dataset represents the operation of a water pump that is powered by an electric engine. The reference product is 1 MJ of electricity consumed by the engine. The amount of energy that is actually delivered to the water varies depending on the operating conditions and pump characteristics.

## Included activities start
The activity starts with the input of electricity into the engine of the water pump.

## Included activities end
The activity ends with the consumption of electricity by the water pump. The inventory includes the use of lubricating oil which results in an output of waste oil. The pump itself is taken into account through the input of "water pump, 22kW".

## Geography
This dataset is not related to a specific geography. It is assumed to be representative of the average operation of an electric pump.

## Technology
This dataset is assumed to represent the average current technology for electric water pumps.

## Time period
This dataset has no specific time period as it is based on estimations and assumptions.

## Parameters
- efficiency: 0.56 dimensionless; name pump_efficiency; = 0.7*0.8
  Overall efficiency of the pump: the efficiency of the pump shaft is 70%, while the efficiency of the drive or motor is assumed to be 80% for an electric motor.

## Reference product
- water pump operation, electric: 1 MJ; By-product classification allocatable product; CPC 83327: Engineering services for water, sewerage and drainage projects
  production volume 3.77316e11 MJ
  properties: carbon allocation 0 kg, carbon content 0, price 0.0340395 EUR2005

## Inputs from technosphere
- electricity, low voltage: 0.000260949, 0.000507018, 0.000158703, 0.000806882, 0.000311135, 0.0327666, 1.5677e-5, 0.000106404, 0.000355035, 0.000283036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 kWh (124 suppliers, which the file names only by identifier); sum of these 0.277778 kWh; lognormal variance with pedigree 0.2106, pedigree (5,5,5,5,5)
- lubricating oil: 0.000514019 kg; lognormal variance with pedigree 0.2106, pedigree (5,5,5,5,5)
  properties: carbon content, fossil 0.75, dry mass 1 kg, heating value, net 40.2 MJ, wet mass 1 kg
- waste mineral oil: -0.000514019 kg; lognormal variance with pedigree 0.2106, pedigree (5,5,5,5,5)
  properties: carbon content, fossil 0.864444, dry mass 0.9 kg, heating value, net 34.7 MJ, water content 0.111111, wet mass 1 kg
- water pump, 22kW: 7.82185e-6 unit; lognormal variance with pedigree 0.2106, pedigree (5,5,5,5,5)
  properties: lifetime 10 year, lifetime capacity in m3 317442 m3

## Sampling procedure
Calculated data.

## Extrapolations
The data concerning lubricating oil use is copied from the dataset "water pump operation, diesel" GLO.
