# fatty acid production, from coconut oil

Dataset: EcoSpold 2, unit process
Geography: RoW
Time period: 2005-01-01 to 2022-12-31
Technology level: current
Classification: ISIC rev.4 ecoinvent: 2011:Manufacture of basic chemicals
Synonyms: carboxylic acid
Scenario: Business-as-Usual
System model: Substitution, consequential, long-term
Generated by: Lucia Valsasina
Database: ecoinvent
isCopyrightProtected: true
accessRestrictedTo: 1

## General comment
The functional unit is 1 kg of fatty acids - based on the oil from coco nuts. Coconut fatty acids and their fractions can either be used directly or converted to other derivates, covering a broad range of applications in the oleochemical industry. The largest part of coconut fatty acids goes into the manufacture of toilet soap, where its lauric content provides the required lathering properties (Gervajio, 2005).
Reference: Gervajio, Gregorio C.. 2005. Fatty Acids and Derivates from Conconut Oil, Bailey's Industrial Oil and Fat Products, Sixth Edition, Six Volume Set. Edited by Freidoon Shahidi. John wiley & Sons, Inc.
For more information on the model please refer to the dedicate ecoinvent report, access it in the Report section of ecoQuery (http://www.ecoinvent.org/login-databases.html)
[This dataset is meant to replace the following datasets:
- fatty acid production, from vegetable oil, GLO, 1995 - 1995]

## Included activities start
The activity starts when the raw materials enter the process.

## Included activities end
Materials entering the process are included as well as energy uses, infrastructure and emissions.

## Geography
The inputs to the process are calculated based on stoichiometry and literature data, they are therefore considered to be valid for the chosen geography.

## Technology
Coconut oil is split into its corresponding fatty acids and glycerine. In the chemical reaction triglyceride reacts with water to fatty acid and glycerine, for example:
RCOOCH2 + 3 H2O → RCOOH + CH2OH
Gervajio (2005) describes four possible technologies applied for the fat-splitting process. Here we model the continuous process (also known as Colgate-Emery Process), which is the most efficient of the current technologies (up to 99%). A high degree of splitting is achieved through a countercurrent flow of oil and water under 250-260 degree C. A catalyst is not needed, however, can be employed.
In a second stage after splitting, the fatty acids are distilled to remove the high and low boiling impurities. This happens in a distillation tower under vacuum and about 200 degrees C. The distilled fatty acid is free of major impurities and is of close to water white color. IPS Engineers (2013) mention a process efficiency of 85%-95%, therefore we apply the average of 90%.
In a third step, fractionation, specific components, such as C12 for lauric acid/dodecanol production, are separated. For a lack of better information, we approximate electricity and steam use of fractionation with data reported for vegetable oil processing in India (TERI, 2013).
Reference: Gervajio, Gregorio C.. 2005. Fatty Acids and Derivates from Conconut Oil, Bailey's Industrial Oil and Fat Products, Sixth Edition, Six Volume Set. Edited by Freidoon Shahidi. John wiley & Sons, Inc.
IPS Engineering. 2013. Oleochemicals - Processing Plant. Retrieved online from http://www.ips-engineering.it/Doc/Oleochemicals.pdf, last accessed 26/06/2017
The Energy and Resource Institute (TERI). 2013. Widening the coverage of PAT Scheme, Sectoral Manual – Vegetable oil industry, p. 15. Retrieved online from http://shaktifoundation.in/wp-content/uploads/2014/02/widening-of-pat-sectors-vegetable-refineries.pdf, last accessed 26/06/2017
For more information on the model please refer to the dedicate ecoinvent report, access it in the Report section of ecoQuery (http://www.ecoinvent.org/login-databases.html)

## Time period
The activity is based on literature data from 2005, 2013 and 2015.

## Reference product
- fatty acid: 1 kg; By-product classification allocatable product; CPC 34120: Industrial monocarboxylic fatty acids; acid oils from refining
  production volume 7.69784e7 kg
  properties: carbon allocation 0.75 kg, carbon content 0.75, carbon content, fossil 0, carbon content, non-fossil 0.75, dry mass 1 kg, heating value, net 22.73 MJ, price 1.45 EUR2005, water content 0, water in wet mass 0 kg, wet mass 1 kg

## Inputs from technosphere
- chemical factory, organics: 4e-10 unit; lognormal variance with pedigree 0.3098, pedigree (2,3,2,4,3)
- coconut oil, crude: 1.1814 kg; lognormal variance with pedigree 0.009825, pedigree (2,3,2,2,3)
  properties: carbon content, non-fossil 0.75, dry mass 1 kg, heating value, net 38.4 MJ, wet mass 1 kg
- electricity, medium voltage: 0.00288274, 0.000107858, 0.00137038, 0.0237846, 0.00199713, 0.000107045 kWh (6 suppliers, which the file names only by identifier); sum of these 0.0302497 kWh; lognormal variance with pedigree 0.009825, pedigree (2,3,2,2,3)
- heat, from steam, in chemical industry: 2.40331 MJ; lognormal variance with pedigree 0.009825, pedigree (2,3,2,2,3)
  properties: heating value, net 1 MJ
- tap water: 0.0306281, 0.0107676, 0.0825099, 0.0164142, 0.118903, 0.000276067, 0.413902 kg (7 suppliers, which the file names only by identifier); sum of these 0.673401 kg; lognormal variance with pedigree 0.009825, pedigree (2,3,2,2,3)
  properties: carbon content, fossil 0.00178991, dry mass 0.000337476 kg, water content 2962.17, wet mass 1 kg

## Inputs from nature
- Water, cooling, unspecified natural origin [natural resource, in water]: 0.0195455 m3; lognormal variance with pedigree 0.0104, pedigree (2,3,2,4,3)

## Emissions to nature
- Water [air, unspecified]: 0.011982 m3; lognormal variance with pedigree 0.0104, pedigree (2,3,2,4,3)
- Water [water, unspecified]: 0.0075634 m3; lognormal variance with pedigree 0.0104, pedigree (2,3,2,4,3)

## Sampling procedure
Literature data and stochiometric calculation.

## Review by Emilia Moreno Ruiz 2017-08-10
This dataset was additionally reviewed in a separate review process by Eric Johnson of Atlantic Consulting as well as Emilia Moreno Ruiz and Gregor Wernet of ecoinvent.
