# sewer grid construction, 1.6E8l/year, 6 km

Dataset: EcoSpold 2, unit process
Geography: RoW
Time period: 1996-01-01 to 2022-12-31
Technology level: current
Classification: ISIC rev.4 ecoinvent: 4220:Construction of utility projects
Classification: EcoSpold01Categories: waste management/wastewater treatment
Synonyms: municipal sewer infrastructure for capacity class 5
Tags: ConvertedDataset
Scenario: Business-as-Usual
System model: Substitution, consequential, long-term
Generated by: Gabor Doka (obsolete)
Published in: Doka G. 2007
Database: ecoinvent
isCopyrightProtected: true
accessRestrictedTo: 1

## General comment
Sewer system for municipal wastewater treatment plant capacity class 5 with an average per-captia equivalent PCE (Einwohnergleichwert) of 806. Average length 6.13 km. The lifetime is 100 years including a renovation after 70 years.
[This dataset was already contained in the ecoinvent database version 2. It was not individually updated during the transfer to ecoinvent version 3. Life Cycle Impact Assessment results may still have changed, as they are affected by changes in the supply chain, i.e. in other datasets. This dataset was generated following the ecoinvent quality guidelines for version 2. It may have been subject to central changes described in the ecoinvent version 3 change report (http://www.ecoinvent.org/database/ecoinvent-version-3/reports-of-changes/), and the results of the central updates were reviewed extensively. The changes added e.g. consistent water flows and other information throughout the database. The documentation of this dataset can be found in the ecoinvent reports of version 2, which are still available via the ecoinvent website. The change report linked above covers all central changes that were made during the conversion process.]

## Included activities end
Infrastructure materials for municipal sewer system, transports, dismantling.

## Geography
Specific to the technology mix and human settlement structure encountered in Switzerland around 1996.

## Technology
Underground sewer system with pipes

## Parameters
- fraction, process water, to air: 0.15 dimensionless; lognormal variance with pedigree 0.092025, pedigree (4,4,3,2,4)
- fraction, tap water, to air: 0.15 dimensionless; lognormal variance with pedigree 0.092025, pedigree (4,4,3,2,4)

## Reference product
- sewer grid, 1.6E8l/year, 6 km: 1 km; By-product classification allocatable product; CPC 53253: Sewage and water treatment plants
  production volume 3.96633 km
  properties: carbon allocation 0 kg, carbon content 0, price 176300 EUR2005

## Inputs from technosphere
- cast iron: 8760 kg; lognormal variance with pedigree 0.3229, pedigree (2,2,5,5,1)
  properties: carbon content, fossil 0.04, dry mass 1 kg, wet mass 1 kg
- cement, unspecified: 273.334, 347.152, 111377, 137.526, 6700.48, 417.88, 11059.7, 2912.17, 1774.68 kg (9 suppliers, which the file names only by identifier); sum of these 135000 kg; lognormal variance with pedigree 0.3229, pedigree (2,2,5,5,1)
  properties: dry mass 1 kg, wet mass 1 kg
- concrete, normal strength: 9.88512, 1.03002, 0.894624, 0.669968, 19.863, 4.69052, 353.628, 8.3387 m3 (8 suppliers, which the file names only by identifier); sum of these 399 m3; lognormal variance with pedigree 0.3229, pedigree (2,2,5,5,1)
  properties: dry mass 2190 kg, water content 0.086758, wet mass 2380 kg
- diesel, burned in building machine: 28100 MJ; lognormal variance with pedigree 0.3229, pedigree (2,2,5,5,1)
  properties: heating value, net 1 MJ
- electricity, medium voltage: 890.043, 164.815, 33.3011, 423.101, 895.634, 7343.44, 616.612, 33.05 kWh (8 suppliers, which the file names only by identifier); sum of these 10400 kWh; lognormal variance with pedigree 0.3229, pedigree (2,2,5,5,1)
- excavation, hydraulic digger: 2970 m3; lognormal variance with pedigree 0.3229, pedigree (2,2,5,5,1)
- gravel, crushed: 577.39, 28872.5, 110823, 6306.83 kg (4 suppliers, which the file names only by identifier); sum of these 146580 kg; lognormal variance with pedigree 0.3229, pedigree (2,2,5,5,1)
  properties: dry mass 1 kg, wet mass 1 kg
- gravel, round: 551420 kg; lognormal variance with pedigree 0.3229, pedigree (2,2,5,5,1)
  properties: dry mass 1 kg, wet mass 1 kg
- polyethylene, high density, granulate: 24300 kg; lognormal variance with pedigree 0.3229, pedigree (2,2,5,5,1)
  properties: carbon content, fossil 0.857143, dry mass 1 kg, heating value, net 42.47 MJ, wet mass 1 kg
- polypropylene, granulate: 1420 kg; lognormal variance with pedigree 0.3229, pedigree (2,2,5,5,1)
  properties: carbon content, fossil 0.857143, dry mass 1 kg, heating value, net 32.78 MJ, wet mass 1 kg
- polyvinylchloride, emulsion polymerised: 181.277 kg; lognormal variance with pedigree 0.3229, pedigree (2,2,5,5,1)
  properties: carbon content, fossil 0.387097, dry mass 1 kg, heating value, net 21.5 MJ, wet mass 1 kg
- polyvinylchloride, suspension polymerised: 1238.72 kg; lognormal variance with pedigree 0.3229, pedigree (2,2,5,5,1)
  properties: carbon content, fossil 0.387097, dry mass 1 kg, heating value, net 21.5 MJ, wet mass 1 kg
- reinforcing steel: 51800 kg; lognormal variance with pedigree 0.3229, pedigree (2,2,5,5,1)
  properties: carbon content, fossil 0.004, dry mass 1 kg, wet mass 1 kg
- sand: 31.271, 6023.45, 391945 kg (3 suppliers, which the file names only by identifier); sum of these 398000 kg; lognormal variance with pedigree 0.3229, pedigree (2,2,5,5,1)
  properties: dry mass 1 kg, wet mass 1 kg
- steel, chromium steel 18/8, hot rolled: 18000 kg; lognormal variance with pedigree 0.3229, pedigree (2,2,5,5,1)
  properties: carbon content, fossil 0.0008, dry mass 1 kg, wet mass 1 kg
- synthetic rubber: 473 kg; lognormal variance with pedigree 0.3229, pedigree (2,2,5,5,1)
  properties: carbon content, fossil 0.871949, dry mass 1 kg, heating value, net 26.42 MJ, wet mass 1 kg
- tap water: 440071, 1.32444e6, 154710, 1.18552e6, 235843, 1.70842e6, 3966.59, 5.94703e6 kg (8 suppliers, which the file names only by identifier); sum of these 1.1e7 kg; lognormal variance with pedigree 0.3229, pedigree (2,2,5,5,1)
  properties: carbon content, fossil 0.00178991, dry mass 0.000337476 kg, water content 2962.17, wet mass 1 kg
- waste concrete, not reinforced: -1.59803e6, -111971 kg (2 suppliers, which the file names only by identifier); sum of these -1.71e6 kg; lognormal variance with pedigree 0.3229, pedigree (2,2,2,5,1)
  properties: dry mass 1 kg, wet mass 1 kg
- waste polyethylene: -20014, -191.022, -78.8988, -31.8742, -2858.92, -14.4467, -74.9218, -2435.93 kg (8 suppliers, which the file names only by identifier); sum of these -25700 kg; lognormal variance with pedigree 0.3229, pedigree (2,2,2,5,1)
  properties: carbon content, fossil 0.825301, dry mass 0.996 kg, heating value, net 42.47 MJ, water content 0.00401606, wet mass 1 kg
- waste polyvinylchloride: -4.35939, -1.76114, -1105.83, -157.963, -10.5545, -0.79822, -134.592, -4.13965 kg (8 suppliers, which the file names only by identifier); sum of these -1420 kg; lognormal variance with pedigree 0.3229, pedigree (2,2,2,5,1)
  properties: carbon content, fossil 0.440882, dry mass 0.998 kg, heating value, net 21.51 MJ, water content 0.00200401, wet mass 1 kg
- waste rubber, unspecified: -236.5, -236.5 kg (2 suppliers, which the file names only by identifier); sum of these -473 kg; lognormal variance with pedigree 0.3229, pedigree (2,2,2,5,1)
  properties: carbon content, fossil 0.853, dry mass 1 kg, heating value, net 27.19 MJ, wet mass 1 kg

## Emissions to nature
- Water [air, unspecified]: 1650 m3; lognormal variance with pedigree 0.0427, pedigree (2,2,5,5,1)
- Water [water, unspecified]: 9350 m3; lognormal variance with pedigree 0.0427, pedigree (2,2,5,5,1)

## Sampling procedure
data from literature

## Extrapolations
This dataset has been copied from an original dataset covering the geography CH. The uncertainty has been adjusted accordingly.

## Review by Niels Jungbluth 2003-06-11
Passed.
