# adhesive production, for metal

Dataset: EcoSpold 2, unit process
Geography: RoW
Time period: 1996-01-01 to 2022-12-31
Technology level: current
Classification: ISIC rev.4 ecoinvent: 2029:Manufacture of other chemical products n.e.c.
Classification: EcoSpold01Categories: paintings/production
Tags: ConvertedDataset
Scenario: Business-as-Usual
System model: Substitution, consequential, long-term
Generated by: Martin Lehmann
Published in: Kellenberger D. 2007
Database: ecoinvent
isCopyrightProtected: true
accessRestrictedTo: 1

## General comment
Basic materials applied in the production are organic chemicals, liquid epoxy resin, hydrated lime and silica sand. This dataset does not include any energy consumption in the production phase. Road and rail transport are included.
[This dataset was already contained in the ecoinvent database version 2. It was not individually updated during the transfer to ecoinvent version 3. Life Cycle Impact Assessment results may still have changed, as they are affected by changes in the supply chain, i.e. in other datasets. This dataset was generated following the ecoinvent quality guidelines for version 2. It may have been subject to central changes described in the ecoinvent version 3 change report (http://www.ecoinvent.org/database/ecoinvent-version-3/reports-of-changes/), and the results of the central updates were reviewed extensively. The changes added e.g. consistent water flows and other information throughout the database. The documentation of this dataset can be found in the ecoinvent reports of version 2, which are still available via the ecoinvent website. The change report linked above covers all central changes that were made during the conversion process.]

## Included activities end
The dataset describes the production of a metal adhesive compound used e.g. in the aluminium window frame production.

## Geography
Data retrieved from a safety data sheet by a German producer. Applicable for Europe.

## Technology
Simple mass balance. No process energy included.

## Reference product
- adhesive, for metal: 1 kg; By-product classification allocatable product; CPC 35499: Other chemical products n.e.c.
  production volume 3.75794 kg
  properties: carbon allocation 0.286533 kg, carbon content 0.286533, carbon content, fossil 0.286533, carbon content, non-fossil 0, dry mass 1 kg, heating value, net 8.68 MJ, price 5.377 EUR2005, water content 0, water in wet mass 0 kg, wet mass 1 kg

## Inputs from technosphere
- chemical factory, organics: 4e-10 unit; lognormal variance with pedigree 0.3146, pedigree (2,4,5,5,1)
- chemical, organic: 0.0411 kg; lognormal variance with pedigree 0.0166, pedigree (2,4,5,5,1)
  properties: carbon content, fossil 0.628, dry mass 1 kg, heating value, net 19.03 MJ, wet mass 1 kg
- epoxy resin, liquid: 0.616 kg; lognormal variance with pedigree 0.0166, pedigree (2,4,5,5,1)
  properties: carbon content, fossil 0.42325, dry mass 1 kg, heating value, net 12.82 MJ, wet mass 1 kg
- lime, hydrated, packed: 0.274 kg; lognormal variance with pedigree 0.0166, pedigree (2,4,5,5,1)
  properties: dry mass 0.997 kg, water content 0.00300903, wet mass 1 kg
- silica sand: 0.0685 kg; lognormal variance with pedigree 0.0166, pedigree (2,4,5,5,1)
  properties: dry mass 0.99 kg, water content 0.010101, wet mass 1 kg

## Sampling procedure
Company information

## Extrapolations
see Geography This dataset has been copied from an original dataset covering the geography DE. The uncertainty has been adjusted accordingly.

## Review by Rolf Frischknecht 2007-11-07
passed
