# concrete production, 50MPa, with cement, CEM II/B

Dataset: EcoSpold 2, unit process
Geography: GLO
Time period: 2017-01-01 to 2022-12-31
Technology level: current
Classification: ISIC rev.4 ecoinvent: 2395:Manufacture of articles of concrete, cement and plaster
Synonyms: ready mixed concrete; 50MPa ready mixed concrete; ready-mix concrete
Scenario: Business-as-Usual
System model: Substitution, consequential, long-term
Generated by: [System]
Published in: Muigai, R. 2017
Database: ecoinvent
isCopyrightProtected: true
accessRestrictedTo: 1

## General comment
This dataset represents the production of South African 50MPa ready-mix concrete. Density: 2,232 kg/m³. The composition of concrete (for 1 m³) contains: Portland fly ash cement 545 kg, Water 157 kg, Gravel 950kg, Sand 737 kg, Admixtures (air-entrainers and superplastisizers) 2.96kg. [The amount of ingredients indicated here do not include the production waste amount of 24.5kg per 1m3 of concrete adopted from "concrete production, 50MPa, RNA only, GLO 2006" dataset [accessed on 2017/12/14 ]. The production waste volume is proportionally shared between the inputs: cement, sand and gravel. The adjusted input values are indicated in the exchange section. In addition, the amount of water included here refers to the batch water. Non-process water is adopted from "concrete production, 50MPa, RNA only, GLO 2006" dataset [accessed on 2017/12/14 ]]. 50 MPa concrete is Ultra high strength concrete is suitable for suspended structural beams and slabs, columns and water-retaining structures. Annual production volume of Ready-Mix concrete for South Africa is published in www.statssa.gov.za. Distribution by Ready-Mix concrete for South Africa is estimated based on a sample of 1% of ready-mix producers in SA. Distribution by ready-mix strength class is estimate as: • 15MPa = 3.6% 20 MPa = 4 % • 25 MPa = 32 % • 30 MPa = 49% • 35 MPa = 4 % • 40 MPa = 6 % • 45 MPa = 0.1 % • 50 MPa = 1.3%
This dataset is a copy of the corresponding ZA dataset. The production volume is set equal to the local activity so that the RoW is not created.

## Included activities start
From reception of raw materials at the ready-mix plant gate.

## Included activities end
This activity ends with the input of concrete in the mixing truck. The dataset includes the whole manufacturing processes to produce ready-mixed concrete, internal processes (material handling and mixing) and infrastructure. The dataset does not include the transportation of concrete in the mixing truck. An average of 4.64 litres of diesel is used on average transportation of 1m3 concrete.

## Geography
South African data. For some exchanges RER-modules have been used as proxy. Data quality indicators adjusted accordingly.

## Technology
Typical technology for South Africa production.

## Parameters
- fraction of 20 MPa concrete to overall concrete production: 0.04 dimensionless; name fraction_20MPa_concrete; lognormal variance with pedigree 0.0014, pedigree (2,2,1,3,1)
  For Annual production volume purpose. Calculated value based on primary data collection in South Africa. In South Africa, 20MPa concrete represents 4% of the overall ready-mix concrete production.
- fraction of 50 MPa concrete to overall concrete production: 0.013 dimensionless; name fraction_50MPa_concrete
  For Annual production volume purpose. Calculated value based on primary data collection in South Africa. In South Africa, 50MPa concrete represents 1.3% of the overall ready-mix concrete production.
- fraction, process water, to air: 0.15 dimensionless; name fraction_PW_to_air
  Rough estimation to represent water evaporation of process water. Adopted from "20MPa, RNA only, CA-QC 2006" dataset on 2017/11/05
- fraction_01: 0.8 dimensionless; name fraction_ethylene_oxide
  Literature value. Superplastisizer assumed to be 80% ehtlyne oxide. 20 MPa mix admixtures. Source: Athena and morrison Hershfield (2012): Life Cycle Assessment of Precast Concrete Commerical Buildings Cradle-to-Grave. Adopted from "20MPa, RNA only, CA-QC 2006" dataset on 2017/11/05
- fraction_02: 0.2 dimensionless; name fraction_acetic_acid
  Literature value. Superplastisizer assumed to be 20% acetic acid. 20 MPa mix admixtures. Source: Athena and morrison Hershfield (2012): Life Cycle Assessment of Precast Concrete Commerical Buildings Cradle-to-Grave. Adopted from "20MPa, RNA only, CA-QC 2006" dataset on 2017/11/05
- south africa concrete prod: 5.30815e6 m3; name PV_ready_mix_ZA
  Annual concrete production in South Africa
- superplastisizer: 2.96 kg
  Estimated value from primary data collection

## Reference product
- concrete, 50MPa: 1 m3; By-product classification allocatable product; CPC 37510: Non-refractory mortars and concretes
  production volume 1.48425e6 m3
  properties: carbon allocation 2.232e-48 kg, carbon content 1e-51, carbon content, fossil 1e-51, cement content 545 kg, dry mass 2232 kg, fly ash content 81 kg, gravel content 950 kg, price 185 EUR2005, sand content 737 kg, water content 0.0703405, water in wet mass 157 kg, wet mass 2389 kg

## Inputs from technosphere
- acetic acid, without water, in 98% solution state: 0.592 kg; lognormal variance with pedigree 0.002, pedigree (1,1,1,5,1)
  properties: carbon content, fossil 0.400016, dry mass 1 kg, heating value, net 14.6 MJ, wet mass 1 kg
- cement, CEM II/B: 9.35424, 35.7425, 505.492 kg (3 suppliers, which the file names only by identifier); sum of these 550.589 kg; lognormal variance with pedigree 0.0031, pedigree (2,1,1,5,1)
  properties: dry mass 1 kg, wet mass 1 kg
- concrete mixing factory: 4.57e-7 unit; lognormal variance with pedigree 0.3228, pedigree (2,1,2,5,1)
- diesel, burned in building machine: 15.6427 MJ; lognormal variance with pedigree 0.002, pedigree (1,1,1,5,1)
  properties: density 0.84 kg/l, fuel input in physical units, m3 0.0004351 m3, heating value, net 1 MJ
- electricity, medium voltage: 3.57 kWh; lognormal variance with pedigree 0.02, pedigree (4,1,1,5,1)
- ethylene oxide: 1.58516, 0.782843 kg (2 suppliers, which the file names only by identifier); sum of these 2.368 kg; lognormal variance with pedigree 0.002, pedigree (1,1,1,5,1)
  properties: carbon content, fossil 0.545455, dry mass 1 kg, heating value, net 27.53 MJ, wet mass 1 kg
- gravel, round: 0.249533, 959.493 kg (2 suppliers, which the file names only by identifier); sum of these 959.743 kg; lognormal variance with pedigree 0.002, pedigree (1,1,1,5,1)
  properties: dry mass 1 kg, wet mass 1 kg
- lubricating oil: 0.0098294, 0.0020706 kg (2 suppliers, which the file names only by identifier); sum of these 0.0119 kg; lognormal variance with pedigree 0.0128, pedigree (2,1,2,5,1)
  properties: carbon content, fossil 0.75, dry mass 1 kg, heating value, net 40.2 MJ, wet mass 1 kg
- sand: 0.0584895, 11.2663, 0.134894, 733.098 kg (4 suppliers, which the file names only by identifier); sum of these 744.558 kg; lognormal variance with pedigree 0.002, pedigree (1,1,1,5,1)
  properties: dry mass 1 kg, wet mass 1 kg
- steel, low-alloyed, hot rolled: 0.0238 kg; lognormal variance with pedigree 0.0128, pedigree (2,1,2,5,1)
  properties: carbon content, fossil 0.005, dry mass 1 kg, wet mass 1 kg
- tap water: 197.941 kg; lognormal variance with pedigree 0.002, pedigree (1,1,1,5,1)
  properties: batch water 157 kg, carbon content, fossil 0.00178991, dry mass 0.000337476 kg, non-process water, net 40.9412 kg, water content 2962.17, wet mass 1 kg
- waste concrete: -1.67402, -0.0059187, -22.8201 kg (3 suppliers, which the file names only by identifier); sum of these -24.5 kg; lognormal variance with pedigree 0.0126, pedigree (2,1,1,5,1)
  properties: carbon content, fossil 1e-51, dry mass 0.932618 kg, water content 0.0722503, wet mass 1 kg
- wastewater from concrete production: -0.0346325, -0.000167479 m3 (2 suppliers, which the file names only by identifier); sum of these -0.0348 m3; lognormal variance with pedigree 0.0126, pedigree (2,1,1,5,1)
  properties: carbon content, fossil 0.027074, dry mass 0.449139 kg, water content 2225.48, wet mass 1000 kg

## Emissions to nature
- Carbon dioxide, fossil [air, non-urban air or from high stacks]: 1.52845 kg; lognormal variance with pedigree 0.0031, pedigree (2,1,1,5,1)
- Water [air, unspecified]: 0.00614118 m3; lognormal variance with pedigree 0.002, pedigree (1,1,1,5,1)
- Chlorides, unspecified [water, unspecified]: 3.09e-9 kg; lognormal variance with pedigree 0.0032, pedigree (2,1,1,5,1)
- Copper ion [water, unspecified]: 1.55e-8 kg; lognormal variance with pedigree 0.0032, pedigree (2,1,1,5,1)
- Iron ion [water, unspecified]: 1.55e-8 kg; lognormal variance with pedigree 0.0032, pedigree (2,1,1,5,1)
- Oils, unspecified [water, unspecified]: 2.32e-7 kg; lognormal variance with pedigree 0.0032, pedigree (2,1,1,5,1)
- Suspended solids, unspecified [water, unspecified]: 4.64e-7 kg; lognormal variance with pedigree 0.0032, pedigree (2,1,1,5,1)

## Sampling procedure
The data presented in this dataset is representative of ready-mix producers who represent 35% of the concrete production market in ZA.

## Extrapolations
This activity represents South Africa ready mix concrete production, Some of the data were taken from the "concrete production 50MPa, RNA only, GLO 2006" dataset [Accessed on 2017/12/14]. Whereas some of the values were calculated based on primary data collection in South Africa. The concrete constituents (cement, gravel, and sand), the electricity consumption and the acetic acid (superplasticizer) consumption were calculated based on primary data collection in South Africa.The uncertainty has been adjusted accordingly.
