# electricity production, hydro, pumped storage

Dataset: EcoSpold 2, unit process
Geography: IN-AP
Time period: 1945-01-01 to 2022-12-31
Technology level: modern
Classification: ISIC rev.4 ecoinvent: 3510:Electric power generation, transmission and distribution
Tags: hydro power
Scenario: Business-as-Usual
System model: Substitution, consequential, long-term
Generated by: Muhammed Noor Hossain
Published in: Hossain, Muhammed Noor 2016
Database: ecoinvent
isCopyrightProtected: true
accessRestrictedTo: 1

## General comment
This dataset represents the production of high voltage electricity in a pumped storage power plant unit in India - Andhra Pradesh (a state/union territory in India) in 2012. The calculation of this dataset is based on data of reservoir hydro power plant units. For this, a representative sample of various types of dams in Switzerland is taken into account, i.e. 52 reservoir power plants with an annual gross production output of 17.8 TWh and an installed capacity of 9130 MW. Reservoir power plants and pumped storage power plants are dealt with together due to the fact that the construction efforts are related. Lifetime is assumed to be 150 years for the dam and 80 years for the rest of materials. The data refers to plant operation of a mix of types of dams built between 1945 and 1970; therefore they might not be representative for more modern construction, for an individual type and for small-scale and smallest-scale plants. This dataset is created as a child of the global dataset. All values except the annaul production volume are directly inherited from the global dataset. The annual production volume value is taken from India- specific source.
[This dataset is meant to replace the following datasets:
- electricity production, hydro, pumped storage, IN, 1945 - 2015]

## Included activities start
From water pumped up from a lower to an upper reservoir.

## Included activities end
The activity ends with 1 kWh of high voltage electricity produced at the power plant and arrived at the busbar.

The dataset includes the use of pump energy (electricity, high voltage), lubricant oil, the volume of the reservoir, the mass of water passing through the turbines and an estimation of greenhouse gas emissions out of the water reservoir.

The dataset doesn"t include an analysis of net greenhouse gas emissions (due to a lack of respective information) and the hydrological and biological impacts are only rudimentary included via land use (occupation and transformation) data.

## Geography
Data represent the average of a characteristic sample of Swiss reservoir hydropower plants, valid for pumped storage hydro power plants.

## Technology
Definition of pumped storage in this dataset: The water is not being pumped for circulation reasons, but for increasing the inflow of a reservoir. Net production is the gross production minus about 1% losses. Additionally there is energy needed for pumping. The efficiency of a pumped storage hydropower plant is around 70% (p.14 in Bauer et al. 2007).

## Time period
The Annual Production Volume is for the time period of 01.04.2012 - 31.03.2013. Central Electricity Authority (CEA), India documents annual electricity production data for the mentioned time period.

## Parameters
- gross electricity production: 3.156e8 kWh; name gross_electricity; lognormal variance with pedigree 0.0018, pedigree (2,1,1,1,2)
  Literature and calculated value. Annual production volume data were extracted from the annual thermal electricity generation report of Central Electricity Authority, India (CEA, 2013). The Annual Production Volume is for the time period of 01.04.2012 - 31.03.2013 since CEA documents annual electricity production data for the mentioned time period.
  CEA. (2013). Region Wise, State Wise, Sector Wise, Type Wise, Station Wise, Unit Wise Generation Report For 31-Mar-2013. Central Electricity Authority (CEA). Retrieved from 04 December, 2016 http://cea.nic.in/reports/daily/dgr/2013/March/31/dgr2.pdf
- lifetime: 150 year; lognormal variance with pedigree 0.0014, pedigree (2,2,1,3,1)
  Estimation based on experiences.
  nan
- losses from gross electricity production: 0.005 dimensionless; name losses_gross_net; lognormal variance with pedigree 0.0018, pedigree (2,1,1,1,2)
  Literature value. Own use of electricity plants in this State/Union Territory in 2012. The default loss as described by the CEA CO2 Baseline Database for the Indian Power Sector is applied, which is 0.5%. CEA. (2014). CO2 Baseline Database for the Indian Power Sector. User Guide, Ministry of Power, Government of India, New Delhi. Retrieved 12 04, 2016, from http://cea.nic.in/reports/others/thermal/tpece/cdm_co2/user_guide_ver10.pdf

## Reference product
- electricity, high voltage: 1 kWh; By-product classification allocatable product; CPC 17100: Electrical energy
  production volume 3.14022e8 kWh
  properties: carbon allocation 0 kg, carbon content 0, price 0.0977 EUR2005

## Inputs from technosphere
- electricity, high voltage: 1.43 kWh; lognormal variance with pedigree 0.012, pedigree (1,1,5,5,3)
- hydropower plant, reservoir, alpine region: 2.10199e-13 unit; lognormal variance with pedigree 0.211, pedigree (5,5,5,5,5)
- hydropower plant, reservoir, non-alpine regions: 1.93841e-13 unit; lognormal variance with pedigree 0.211, pedigree (5,5,5,5,5)
- lubricating oil: 7.56e-6 kg; lognormal variance with pedigree 0.094, pedigree (1,1,5,5,1)
  properties: carbon content, fossil 0.75, dry mass 1 kg, heating value, net 40.2 MJ, wet mass 1 kg
- waste mineral oil: -7.56e-6 kg; lognormal variance with pedigree 0.102, pedigree (1,1,3,5,3)
  properties: carbon content, fossil 0.864444, dry mass 0.9 kg, heating value, net 34.7 MJ, water content 0.111111, wet mass 1 kg

## Inputs from nature
- Occupation, lake, artificial [natural resource, land]: 0.018 m2*year; lognormal variance with pedigree 0.052, pedigree (1,1,5,5,3)
- Transformation, from unspecified [natural resource, land]: 0.00012 m2; lognormal variance with pedigree 0.132, pedigree (1,1,5,5,3)
- Transformation, to industrial area [natural resource, land]: 1.22e-6 m2; lognormal variance with pedigree 0.132, pedigree (1,1,5,5,3)
- Transformation, to lake, artificial [natural resource, land]: 0.00011878 m2; lognormal variance with pedigree 0.132, pedigree (1,1,5,5,3)
- Volume occupied, reservoir [natural resource, in water]: 0.15 m3*year; lognormal variance with pedigree 0.132, pedigree (1,1,5,5,3)
- Water, turbine use, unspecified natural origin [natural resource, in water]: 4.3 m3; lognormal variance with pedigree 0.012, pedigree (1,1,5,5,3)

## Emissions to nature
- Carbon dioxide, from soil or biomass stock [air, non-urban air or from high stacks]: 0.0188137 kg; lognormal variance with pedigree 0.0992, pedigree (5,3,5,4,3)
- Dinitrogen monoxide [air, non-urban air or from high stacks]: 4.0059e-8 kg; lognormal variance with pedigree 0.102, pedigree (1,1,5,5,3)
- Methane, non-fossil [air, non-urban air or from high stacks]: 0.00011 kg; lognormal variance with pedigree 0.0992, pedigree (5,3,5,4,3)
- Water [air, unspecified]: 0.000292217 m3; lognormal variance with pedigree 0.0407, pedigree (2,2,3,1,1)
- Water [water, unspecified]: 4.29971 m3; lognormal variance with pedigree 0.092025, pedigree (4,4,5,2,4)

## Sampling procedure
The inventory is generated using statistical data, literature data and modelling.

## Extrapolations
This dataset has been extrapolated from an original dataset covering the geography CH (Switzerland), which in its turn is extrapolated from a dataset for electricity production in a reservoir plant without pumping. The uncertainty has been adjusted accordingly. Only the annual production volume and the power plant own use values are extracted from the India-specific source. CEA. (2014). CO2 Baseline Database for the Indian Power Sector. User Guide, Ministry of Power, Government of India, New Delhi. Retrieved 12 04, 2016, from http://cea.nic.in/reports/others/thermal/tpece/cdm_co2/user_guide_ver10.pdf

## Review by Karin Treyer 2017-01-05
This dataset has been produced in a project on regionalisation of the Indian electricity mix on a states level.
In general, only key parameters have been adjusted to region-specific conditions, such as the electrical efficiency or power plants own use of electricity (losses from gross to net electricity). Whenever more accurate data will be available on e.g. region-specific emissions from power plants, these should be included in this dataset.
