# transport, freight, lorry with reefer, freezing

Dataset: EcoSpold 2, unit process
Geography: GLO
Time period: 2010-01-01 to 2022-12-31
Technology level: current
Classification: ISIC rev.4 ecoinvent: 4923:Freight transport by road
Scenario: Business-as-Usual
System model: Substitution, consequential, long-term
Generated by: Tereza Levova
Database: ecoinvent
isCopyrightProtected: true
accessRestrictedTo: 1

## General comment
This dataset represent transport of reefer (refrigerated container) by a lorry (truck with semi-trailer). The operation mode of the reefer is freezing (temperature between -35°C and -18°C).
The amount of operation of the reefer needed is calculated using the assumption of the average speed of the lorry.
While the small lorries have build-in refrigeration machine the bigger trucks with semi-trailer are able to directly transport whole reefer. This dataset represents exactly this kind of transport.
Truck with semi-trailer transporting a reefer (http://commons.wikimedia.org/wiki/File:Volvo_FH12-Inger_(F)-2003.jpg, accessed 20141216).

## Included activities start
This dataset simply combine several activities - transport, freight, lorry of bigger sizes and operation of reefer, For more information on these two activities please see the datasets representing these two activities.

## Parameters
- speed: 45 km/hour; name speed_lorry; lognormal variance with pedigree 0.0166, pedigree (4,5,1,1,1)
  Estimated value based on an expert judgement. This value represents an average speed of lorry including all stops and breaks.

## Reference product
- transport, freight, lorry with reefer, freezing: 1 metric ton*km; By-product classification allocatable product; CPC 65111: Road transport services of freight by refrigerator vehicles
  production volume 1.0074e11 metric ton*km
  properties: carbon allocation 0 kg, carbon content 0, price 0.021633 EUR2005

## Inputs from technosphere
- operation, reefer, freezing: 0.925926 kg*day; lognormal variance with pedigree 0.0166, pedigree (4,5,4,1,1)
- transport, freight, lorry 16-32 metric ton, EURO3: 0.0167209, 0.130504, 0.0140754 metric ton*km (3 suppliers, which the file names only by identifier); sum of these 0.1613 metric ton*km; lognormal variance with pedigree 0.0168, pedigree (4,5,5,1,1)
- transport, freight, lorry 16-32 metric ton, EURO4: 0.0138574, 0.118943 metric ton*km (2 suppliers, which the file names only by identifier); sum of these 0.1328 metric ton*km; lognormal variance with pedigree 0.0168, pedigree (4,5,5,1,1)
- transport, freight, lorry 16-32 metric ton, EURO5: 0.00250296, 0.0356098, 0.00618725 metric ton*km (3 suppliers, which the file names only by identifier); sum of these 0.0443 metric ton*km; lognormal variance with pedigree 0.0168, pedigree (4,5,5,1,1)
- transport, freight, lorry 16-32 metric ton, EURO6: 0.00707565, 0.000824346 metric ton*km (2 suppliers, which the file names only by identifier); sum of these 0.0079 metric ton*km; lognormal variance with pedigree 0.0168, pedigree (4,5,5,1,1)
- transport, freight, lorry >32 metric ton, EURO3: 0.029794, 0.227722, 0.0245835 metric ton*km (3 suppliers, which the file names only by identifier); sum of these 0.2821 metric ton*km; lognormal variance with pedigree 0.0168, pedigree (4,5,5,1,1)
- transport, freight, lorry >32 metric ton, EURO4: 0.233676, 0.0272243 metric ton*km (2 suppliers, which the file names only by identifier); sum of these 0.2609 metric ton*km; lognormal variance with pedigree 0.0168, pedigree (4,5,5,1,1)
- transport, freight, lorry >32 metric ton, EURO5: 0.00472088, 0.0762129, 0.0139663 metric ton*km (3 suppliers, which the file names only by identifier); sum of these 0.0949 metric ton*km; lognormal variance with pedigree 0.0168, pedigree (4,5,5,1,1)
- transport, freight, lorry >32 metric ton, EURO6: 0.0141513, 0.00164869 metric ton*km (2 suppliers, which the file names only by identifier); sum of these 0.0158 metric ton*km; lognormal variance with pedigree 0.0168, pedigree (4,5,5,1,1)
