# cottonseed, organic to generic market for energy feed

Dataset: EcoSpold 2, unit process
Geography: RoW
Time period: 2016-01-01 to 2022-12-31
Technology level: current
Classification: ISIC rev.4 ecoinvent: 1080:Manufacture of prepared animal feeds
Scenario: Business-as-Usual
System model: Substitution, consequential, long-term
Generated by: Avraam Symeonidis
Database: ecoinvent
isCopyrightProtected: true
accessRestrictedTo: 1

## General comment
This is a linking (transfering) activity which links cottonseed, organic to the generic market for energy feed. Cottonseeds are a by-product of the cotton ginning process which produces cotton fibres.

## Included activities start
The activity starts with the reception of cottonseeds.

## Included activities end
The activity models the part of cottonseeds that contribute to the generic market for energy feed, resulting in energy and protein outputs.

## Reference product
- cottonseed, organic: 1 kg; By-product classification allocatable product; CPC 01921: Cotton, whether or not ginned
  properties: carbon allocation 0.438425 kg, carbon content 0.475, carbon content, fossil 0, carbon content, non-fossil 0.475, dry mass 0.923 kg, energy content 23.8 MJ, price 0 EUR2005, protein content 0.218, water content 0.0834236, water in wet mass 0.077 kg, wet mass 1 kg

## Inputs from technosphere
- energy feed, gross: 20.9598, 1.00758 MJ (2 suppliers, which the file names only by identifier); sum of these 21.9674 MJ
  properties: dry mass 1 kg, price 0.0108 EUR2005, wet mass 1 kg
- protein feed, 100% crude: 0.201214 kg; lognormal variance with pedigree 0.0093, pedigree (4,3,1,3,1)
  properties: carbon content, non-fossil 0.53, dry mass 1 kg, price 0.424 EUR2005, wet mass 1 kg
