# trout, production in semi-intensive system, in lake

Dataset: EcoSpold 2, unit process
Geography: RoW
Time period: 2012-01-01 to 2022-12-31
Technology level: current
Classification: ISIC rev.4 ecoinvent: 0322:Freshwater aquaculture
Scenario: Business-as-Usual
System model: Substitution, consequential, long-term
Generated by: Angel Avadí
Published in: Angel Avadí 2015
Database: ecoinvent
isCopyrightProtected: true
accessRestrictedTo: 1

## General comment
Data from the Anchoveta Supply Chain project. Trout production in Andean lakes

## Geography
Aquaculture system common in cold lake environments

## Technology
Simple clusters of metal floating cages, commercial floating feed

## Parameters
- feed conversion ratio: 1.4 dimensionless; name FCR; triangular min 1.22927, mostLikely 1.43415, max 1.53659, pedigree (2,3,2,2,2)
  Feed conversion ratio for animal husbandry and aquaculture, expressed in kg feed per kg live weight of slaugthered or harvested animal
- net calorific value: 42.7 MJ/kg; name net_cal_value
  Net Calorific Value for marine diesel, from http://www.effship.com/PartnerArea/MiscPresentations/Dr_Wild_Report.pdf
- stocking density: 1000 dimensionless; name stocking_density
  Final stocking density of aquaculture systems, expressed in kg/m3 or kg/unit of cage/pond/raceway/water body with a known holding capacity

## Reference product
- trout: 1 kg; By-product classification allocatable product; CPC 04222: Farmed salmonidae, live, fresh or chilled
  production volume 5.07596e8 kg
  properties: carbon allocation 0 kg, carbon content 0, price 4.21554 EUR2005

## Inputs from technosphere
- diesel, burned in fishing vessel: 1.22122 MJ; lognormal variance with pedigree 0.2106, pedigree (5,5,5,5,5)
- electricity, medium voltage: 5.19197e-5, 1.04904e-5, 0.000133284, 0.00231331, 0.000194243, 1.04113e-5, 0.000286341 kWh (7 suppliers, which the file names only by identifier); sum of these 0.003 kWh; lognormal variance with pedigree 0.0022, pedigree (2,2,5,3,2)
- floating hexagonal metal cage: 1.67e-5 m; lognormal variance with pedigree 0.01323, pedigree (3,3,5,2,3)
- oxygen, liquid: 0.0195286, 0.0711714 kg (2 suppliers, which the file names only by identifier); sum of these 0.0907 kg; lognormal variance with pedigree 0.0133, pedigree (3,3,5,3,3)
  properties: dry mass 1 kg, wet mass 1 kg
- trout feed, 42% protein: 1.41 kg; lognormal variance with pedigree 0.002125, pedigree (2,2,5,2,2)

## Inputs from nature
- Water, unspecified natural origin [natural resource, in water]: 30.24 m3; lognormal variance with pedigree 0.004, pedigree (3,3,5,1,2)

## Emissions to nature
- Nitrogen [water, unspecified]: 0.0661 kg; lognormal variance with pedigree 0.0415, pedigree (2,2,5,1,2)
- Phosphorus [water, unspecified]: 0.0096 kg; lognormal variance with pedigree 0.0415, pedigree (2,2,5,1,2)
- Water [water, unspecified]: 15.4224 m3; lognormal variance with pedigree 0.004, pedigree (3,3,5,1,2)

## Extrapolations
Trout production in the Titicaca lake (Peru, Bolivia) was asumed to represent lake-based trout production worldwide
