# soda ash, light, crystalline, heptahydrate, to generic market for neutralising agent

Dataset: EcoSpold 2, unit process
Geography: GLO
Time period: 1999-01-01 to 2022-12-31
Technology level: current
Classification: EcoSpold01Categories: chemicals/inorganics
Classification: ISIC rev.4 ecoinvent: 2011:Manufacture of basic chemicals
Synonyms: soda ash; ash; sodium carbonate
Scenario: Business-as-Usual
System model: Substitution, consequential, long-term
Generated by: Sofia Parada Tur
Database: ecoinvent
isCopyrightProtected: true
accessRestrictedTo: 1

## General comment
This activity links the output of the market for soda ash, light, crystalline, heptahydrate to the generic market for neutralising agent.

## Included activities start
Activity starting with the input of soda ash, light, crystaline, heptahydrate, from Solvay process

## Included activities end
Activity ends with the proper conversion of soda ash to neutralising agent in NaOH-equivalents.

## Geography
based on geographical validity of dataset soda production, solvay process

## Technology
based on techmology validity of dataset soda production, solvay process

## Time period
based on temporal validity of dataset soda production, solvay process

## Reference product
- neutralising agent, sodium hydroxide-equivalent: 1 kg; By-product classification allocatable product; CPC 342: Basic inorganic chemicals n.e.c.
  production volume 2.35774e9 kg
  properties: carbon allocation 0 kg, carbon content 0, carbon content, fossil 0, carbon content, non-fossil 0, dry mass 1 kg, price 0.376 EUR2005, water content 0, water in wet mass 0 kg, wet mass 1 kg

## Inputs from technosphere
- soda ash, light: 1.325 kg; lognormal variance with pedigree 0.0106, pedigree (4,1,5,5,1)
  properties: carbon content, fossil 0.0517241, dry mass 1 kg, heating value, net 3.43 MJ, wet mass 1 kg
