# transport, passenger car, EURO 3

Dataset: EcoSpold 2, unit process
Geography: RER
Time period: 2012-01-01 to 2022-12-31
Technology level: current
Classification: ISIC rev.4 ecoinvent: 4922:Other passenger land transport
Tags: internal combustion engine
Scenario: Business-as-Usual
System model: Substitution, consequential, long-term
Generated by: Sofia Parada Tur
Database: ecoinvent
isCopyrightProtected: true
accessRestrictedTo: 1

## General comment
This activity provides an average transport in a passenger car of the class EURO 3 with internal combustion engine. This is a linking activity, linking specific "transport, passenger car" in the EURO 3 class to a more generic product.

## Included activities end
This activity provides an average transport, passenger car in the category EURO 3.

## Technology
Average transport in a passenger car of the category EURO 3 with internal combustion engine. The average takes into account different car sizes (small, medium and large) and fuel types (petrol, diesel and natural gas)

## Parameters
- production volumes sum: 9.35807e11 km; name PV_sum; = 5.32E10 + 8.87E10 + 3.38E07 + 2.10E11 + 3.27E11 + 1.79E08 + 2.35E11 + 2.1E10 + 6.94E08; lognormal variance with pedigree 0.0026, pedigree (3,1,1,1,1)
  sum of the production volumes of the input exchanges in the present inventory. Values obtained from the ecoinvent datasets that produce these inputs as reference products.

## Reference product
- transport, passenger car, EURO 3: 1 km; By-product classification allocatable product; CPC 64119: Other land transportation services of passengers, n.e.c.
  production volume 9.35807e11 km
  properties: carbon allocation 0 kg, carbon content 0, price 0.162494 EUR2005

## Inputs from technosphere
All rows: lognormal variance with pedigree 0.0026, pedigree (3,1,4,1,1)
- transport, passenger car, large size, diesel, EURO 3: 0.0947845 km
- transport, passenger car, large size, natural gas, EURO 3: 3.61186e-5 km
- transport, passenger car, large size, petrol, EURO 3: 0.0568493 km
- transport, passenger car, medium size, diesel, EURO 3: 0.349431 km
- transport, passenger car, medium size, natural gas, EURO 3: 0.000191279 km
- transport, passenger car, medium size, petrol, EURO 3: 0.224405 km
- transport, passenger car, small size, diesel, EURO 3: 0.0224405 km
- transport, passenger car, small size, natural gas, EURO 3: 0.000741606 km
- transport, passenger car, small size, petrol, EURO 3: 0.25112 km

## Review by Emilia Moreno Ruiz 2017-05-26
Shares corrected to represent 100%
