# linseed seed production, for sowing

Dataset: EcoSpold 2, unit process
Geography: CH
Time period: 1999-01-01 to 2022-12-31
Technology level: current
Classification: ISIC rev.4 ecoinvent: 0164:Seed processing for propagation
Tags: WFLDB
Scenario: Business-as-Usual
System model: Substitution, consequential, long-term
Generated by: Patrik Mouron
Published in: Nemecek T. 2015
Database: ecoinvent
isCopyrightProtected: true
accessRestrictedTo: 1

## General comment
This dataset represents the production of 1 kg of linseed seed (fresh weight), with a maximum water content of 6%, at the regional storehouse.
This process is identical to the ecoinvent process 'rape seed production, for sowing, CH' which is used as a proxy for linseed seed production at regional storehouse. This dataset refers to an average situation; for specific situations exchanges might differ substantially due to site specific parameters

## Included activities start
This activity starts after harvest of the seed.

## Included activities end
The seed is processed in the processing centre, treated (pre-cleaning, cleaning, eventually drying, chemical dressing (for integrated production) and bag filling), stored and afterwards transported to the regional storage centre. No data on wastewater production were available.

## Technology
Integrated production

## Time period
Time period referring to the data source: 1999-2002. Based on expert opinion data is considered to be valid at least up to 2012.

## Parameters
- LUC_crop_specific: 1 dimensionless
  This parameter allows to switch between a 'crop specific' and a 'country specific' approach when calculating the LUC of a crop. By default, the chosen approach is 'crop specific', so the value of the parameter is 1. If you want to apply a 'country specific' approach, turn the parameter to 0.

## Reference product
- linseed seed, for sowing: 1 kg; By-product classification allocatable product; CPC 86112: Seed processing services
  production volume 16470.8 kg
  properties: carbon allocation 0.536577 kg, carbon content 0.590234, carbon content, fossil 0, carbon content, non-fossil 0.590234, dry mass 0.909091 kg, price 0.201221 EUR2005, water content 0.1, water in wet mass 0.0909091 kg, wet mass 1 kg

## Inputs from technosphere
- building, multi-storey: 2e-5 m3; lognormal variance with pedigree 0.00535634, pedigree (2,1,4,1,1)
- electricity, low voltage: 0.058 kWh; lognormal variance with pedigree 0.00535634, pedigree (2,1,4,1,1)
- linseed seed, at farm: 1.75 kg; lognormal variance with pedigree 0.00535634, pedigree (2,1,4,1,1)
  properties: carbon content, non-fossil 0.590234, dry mass 0.909091 kg, water content 0.1, wet mass 1 kg

## Inputs from nature
- Carbon dioxide, in air [natural resource, in air]: -2.0163 kg
- Energy, gross calorific value, in biomass [natural resource, biotic]: -18.668 MJ
- Occupation, construction site [natural resource, land]: 8e-6 m2*year; lognormal variance with pedigree 0.167386, pedigree (2,1,4,1,1)
- Occupation, industrial area [natural resource, land]: 0.0002 m2*year; lognormal variance with pedigree 0.167386, pedigree (2,1,4,1,1)
- Transformation, from unspecified [natural resource, land]: 4e-6 m2; lognormal variance with pedigree 0.483411, pedigree (2,1,4,1,1)
- Transformation, to industrial area [natural resource, land]: 4e-6 m2; lognormal variance with pedigree 0.483411, pedigree (2,1,4,1,1)

## Sampling procedure
Data based on a literature, expert information and enquiry of seed processing plants.

## Extrapolations
Production of imported seed is approximated by seed produced in Switzerland.
