# heat and power co-generation unit construction, 160kW electrical, common components for heat+electricity

Dataset: EcoSpold 2, unit process
Geography: RoW
Time period: 1987-01-01 to 2022-12-31
Technology level: current
Classification: EcoSpold01Categories: natural gas/cogeneration
Classification: ISIC rev.4 ecoinvent: 4220:Construction of utility projects
Tags: ConvertedDataset
Scenario: Business-as-Usual
System model: Substitution, consequential, long-term
Generated by: Thomas Heck
Published in: Heck, T. 2007
Database: ecoinvent
isCopyrightProtected: true
accessRestrictedTo: 1

## General comment
The module summarises infrastructure components of a cogeneration unit.
[This dataset was already contained in the ecoinvent database version 2. It was not individually updated during the transfer to ecoinvent version 3. Life Cycle Impact Assessment results may still have changed, as they are affected by changes in the supply chain, i.e. in other datasets. This dataset was generated following the ecoinvent quality guidelines for version 2. It may have been subject to central changes described in the ecoinvent version 3 change report (http://www.ecoinvent.org/database/ecoinvent-version-3/reports-of-changes/), and the results of the central updates were reviewed extensively. The changes added e.g. consistent water flows and other information throughout the database. The documentation of this dataset can be found in the ecoinvent reports of version 2, which are still available via the ecoinvent website. The change report linked above covers all central changes that were made during the conversion process.]

## Included activities end
The module includes all shared components for heat and electricity production. Includes also three-way catalytic converter.

## Geography
Data refers to a plant in Switzerland, assumed valid for Europe (RER)

## Technology
Infrastructure of a specific cogeneration unit installed in Switzerland.

## Reference product
- heat and power co-generation unit, 160kW electrical, common components for heat+electricity: 1 unit; By-product classification allocatable product; CPC 53262: Power plants
  production volume 2.67763 unit
  properties: carbon allocation 0 kg, carbon content 0, price 42223.6 EUR2005

## Inputs from technosphere
- air input/output unit, heat and power co-generation unit, 160kW electrical: 1 unit; lognormal variance with pedigree 0.022, pedigree (1,1,5,5,1)
- catalytic converter, three-way, 19.1l: 5 unit; lognormal variance with pedigree 0.092, pedigree (1,1,5,5,1)
- construction work, heat and power co-generation unit, 160kW electrical: 1 unit; lognormal variance with pedigree 0.022, pedigree (1,1,5,5,1)
- control cabinet, heat and power co-generation unit, 160kW electrical: 1 unit; lognormal variance with pedigree 0.022, pedigree (1,1,5,5,1)
- energy requirement for assembly of heat and power co-generation unit, 160kW electrical: 1 unit; lognormal variance with pedigree 0.022, pedigree (1,1,5,5,1)
- gas motor, 206kW: 1.25 unit; lognormal variance with pedigree 0.062, pedigree (1,1,5,5,1)
- maintenance, heat and power co-generation unit, 160kW electrical: 1 unit; lognormal variance with pedigree 0.022, pedigree (1,1,5,5,1)
- planning, heat and power co-generation unit, 160kW electrical: 1 unit; lognormal variance with pedigree 0.022, pedigree (1,1,5,5,1)
- sound insulation, heat and power co-generation unit, 160kW electrical: 1 unit; lognormal variance with pedigree 0.022, pedigree (1,1,5,5,1)
- start-up, heat and power co-generation unit, 160kW electrical: 1 unit; lognormal variance with pedigree 0.022, pedigree (1,1,5,5,1)

## Sampling procedure
Operator and manufacturer information

## Extrapolations
see Geography/Text This dataset has been copied from an original dataset covering the geography RER. The uncertainty has been adjusted accordingly.

## Review by Gerald Rebitzer (obsolete) 2003-07-03
passed
