# uranium production, diffusion, enriched 3.9%

Dataset: EcoSpold 2, unit process
Geography: US
Time period: 1980-01-01 to 2022-12-31
Technology level: current
Classification: ISIC rev.4 ecoinvent: 2011:Manufacture of basic chemicals
Classification: EcoSpold01Categories: nuclear power/production
Tags: ConvertedDataset
Scenario: Business-as-Usual
System model: Substitution, consequential, long-term
Generated by: [System]
Published in: Dones, R. 2007
Database: ecoinvent
isCopyrightProtected: true
accessRestrictedTo: 1

## General comment
This module does not use a full, consistent set of data specific for the only operational USEC plant in Paducah, for there is no available literature source on that. However the data on the US "model diffusion plants" available in the literature and used herewith were most likely developed on the basis of the existing US facilities. The electricity consumption per unit of SWU of 2600 kWh/SWU is an average value from the literature. Extrapolating direct information from the plant operators, the electricity is assumed to be supplied almost entirely by the Tennessee Valley Authority (base load). The used mix is made of nearly 69% hard coal, about 26% nuclear, and about 5% run-of-river hydropower. Hence, the indirect environmental burdens imported through the high electricity uses are fully represented. Only little information was available for emission species to air and water from the US model diffusion plants, but an average emission of CFC-114 estimated from 2002 data is accounted for. The factor for the infrastructure requirement is calculated using an average capacity of two USEC plants of 9600 t SWU for assumed 50 years operation.

## Included activities end
The module includes: input of UF6; electricity and light fuel oil used for operation; water use, lubricant oil, and wastewater treatment; transport requirements of operation materials, industrial wastes, and contaminated waste from decommissioning (25% of the reinforced concrete and the great part of metals according to the reference). Radioactive and non-radioactive emissions to air and to water from the operation are also included. The infrastructure requirements are accounted for, though construction and operation data partially refer to different plants rather than to one single unit.

## Geography
US data.

## Technology
US uranium enrichment facilities with diffusion process were installed in mid 1950s.

## Parameters
- fraction, cooling water, cooling pond system, to air: 0.032 dimensionless; name fraction_CW_CP_to_air; lognormal variance with pedigree 0.0413, pedigree (2,3,1,3,1)
  Calculated based on literature value (Scown, C.D., 2011, Water Footprint of U.S. Transportation Fuels and supplying information of the article) (Vionnet, S., Quantis Water Database - Technical Report, 2012).
- fraction, cooling water, once-through system, to air: 0.004 dimensionless; name fraction_CW_OT_to_air; lognormal variance with pedigree 0.0413, pedigree (2,3,1,3,1)
  (same comment as for fraction, cooling water, cooling pond system, to air)
- fraction, cooling water, recirculating system, to air: 0.771 dimensionless; name fraction_CW_R_to_air; lognormal variance with pedigree 0.0413, pedigree (2,3,1,3,1)
  (same comment as for fraction, cooling water, cooling pond system, to air)
- fraction, cooling water, to air: 0.3875 dimensionless; name fraction_CW_to_air; = (0.5*fraction_CW_OT_to_air)+(0.5*fraction_CW_R_to_air); lognormal variance with pedigree 0.092025, pedigree (4,4,3,2,4)
  Calculated value based on literature value (see comments of the other parametres present in this dataset) and expert opinion. In the case when no industry/literature data are available about the type of cooling or directly fraction, cooling water, to air specific for the process a default assumption is applied. It is assumed that the once-through cooling system is used in 50% of all cases and recirculating system is used in another 50% of all cases.
- fraction, water, decarbonised, to air: 0.3875 dimensionless; name fraction_WDC_to_air; = fraction_CW_to_air; lognormal variance with pedigree 0.092025, pedigree (4,4,3,2,4)
  Calculated value. See comments in the other parametres present in this dataset. Decarbonised water is considered to be always used as cooling water, thus cooling water fractions to air are applied to all carbonised water input flows to calculate the amount of water consumed in the processes.

## Reference product
- uranium, enriched 3.9%, per separative work unit: 1 unit; By-product classification allocatable product; CPC 33620: Uranium enriched in U235 and its compounds; plutonium and its compounds; alloys, dispersions, ceramic products[…]
  properties: carbon allocation 0 kg, carbon content 0, carbon content, fossil 0, carbon content, non-fossil 0, dry mass 1 kg, price 295.682 EUR2005, water content 0, water in wet mass 0 kg, wet mass 1 kg

## Inputs from technosphere
- electricity, high voltage: 140, 227.465, 451.535, 1780 kWh (4 suppliers, which the file names only by identifier); sum of these 2599 kWh; lognormal variance with pedigree 0, pedigree (1,1,5,1,1)
- heat, district or industrial, other than natural gas: 340.1 MJ; lognormal variance with pedigree 0.02, pedigree (1,1,5,1,1)
  properties: heating value, net 1 MJ
- low level radioactive waste: -0.00054 m3; lognormal variance with pedigree 0.12, pedigree (1,1,1,1,1)
  properties: dry mass 2500 kg, wet mass 2500 kg
- uranium enrichment diffusion facility: 3.81e-9 unit; lognormal variance with pedigree 0.09, pedigree (1,1,5,1,1)
- uranium hexafluoride: 1.47 kg; lognormal variance with pedigree 0, pedigree (1,1,5,1,1)
  properties: dry mass 1 kg, wet mass 1 kg
- water, decarbonised: 3900 kg; lognormal variance with pedigree 0.01, pedigree (1,1,5,1,1)
  properties: wet mass 1 kg

## Emissions to nature
- Ethane, 1,2-dichloro-1,1,2,2-tetrafluoro-, CFC-114 [air, non-urban air or from high stacks]: 0.036 kg; lognormal variance with pedigree 0.01, pedigree (1,1,5,1,1)
- Hydrogen fluoride [air, non-urban air or from high stacks]: 0.0045 kg; lognormal variance with pedigree 0.12, pedigree (1,1,5,1,1)
- Uranium alpha [air, non-urban air or from high stacks]: 0.4 kBq; lognormal variance with pedigree 0.12, pedigree (1,1,5,1,1)
- Water [air, unspecified]: 1.51125 m3; lognormal variance with pedigree 0.0407, pedigree (2,2,5,1,1)
- Aluminium III [water, surface water]: 2.5e-5 kg; lognormal variance with pedigree 0.12, pedigree (1,1,5,1,1)
- Chlorine [water, surface water]: 0.00015 kg; lognormal variance with pedigree 0.12, pedigree (1,1,5,1,1)
- Chromium III [water, surface water]: 2.7e-5 kg; lognormal variance with pedigree 0.12, pedigree (1,1,5,1,1)
- Fluoride [water, surface water]: 4e-5 kg; lognormal variance with pedigree 0.12, pedigree (1,1,5,1,1)
- Hydrocarbons, unspecified [water, surface water]: 2.28e-5 kg; lognormal variance with pedigree 0.12, pedigree (1,1,5,1,1)
- Nitrate [water, surface water]: 0.00327 kg; lognormal variance with pedigree 0.12, pedigree (1,1,5,1,1)
- Phosphate [water, surface water]: 0.0004 kg; lognormal variance with pedigree 0.12, pedigree (1,1,5,1,1)
- Uranium alpha [water, surface water]: 0.5 kBq; lognormal variance with pedigree 1.33, pedigree (1,1,5,1,1)
- Water [water, unspecified]: 2.38875 m3; lognormal variance with pedigree 0.0407, pedigree (2,2,5,1,1)
- Zinc II [water, surface water]: 0.00027 kg; lognormal variance with pedigree 0.12, pedigree (1,1,5,1,1)

## Sampling procedure
Literature

## Review by Thomas Nemecek 2007-08-24
Passed.
