# hake, capture by trawler and landing whole, fresh

Dataset: EcoSpold 2, unit process
Time period: 2011-01-01 to 2022-12-31
Technology level: current
Classification: ISIC rev.4 ecoinvent: 0311:Marine fishing
Scenario: Business-as-Usual
System model: Substitution, consequential, long-term
Generated by: Ian Vázquez-Rowe
Published in: Avadí, A. 2018
Database: ecoinvent
isCopyrightProtected: true
accessRestrictedTo: 1

## General comment
This activity represents capture and landing of Cape hake (Merluccius capensis) by trawlers in the Southeast Atlantic, more specifically, in the EEZ of Namibia (FAO Areas 47, 48, 49 and 50). The vessels modelled in this dataset are industrial vessels with a beam of 50 m. The gear is bottom trawling. All the three modelled vessels are from Spain, but operating permanently in Namibian waters.
System boundaries and relation between activities

## Included activities start
From the vessel use (including landing) and maintenance phases, including all upstream activities

## Included activities end
Port operations and post-landing processing activities are beyond the system boundary.

## Allocation
The system is unallocated between hake landings and the by-catch

## Geography
Cape hake (Merluccius capensis) captured and landed off the coast of Namibia in FAO Areas 47, 48, 49 and 50.

## Technology
Bottom trawling, fish conservation with cooling chambers.

## Time period
Data corresponds to the landings by four vessels in 2011.

## Parameters
- annual landings per vessel: 1.68496e6 kg; name landings_vessel_year; triangular min 388941, mostLikely 1.26443e6, max 3.40151e6, pedigree (1,4,1,1,1)
  Amount of landings per vessel per year
- average_weight_ trawler: 665000 kg; name WeightTrawler; triangular min 588104, mostLikely 658400, max 748496, pedigree (4,2,3,2,2)
  Average weight of trawler in a given fishery.
- lifetime: 60 year; lognormal variance with pedigree 0.3107, pedigree (4,2,3,2,2)
  Lifetime for vessels with dimensions above 45 meters (beam)
- marine fuel use efficiency: 370 kg; name FUE; triangular min 222, mostLikely 370, max 518, pedigree (2,4,1,1,1)
  Amount of marine fuel consumed per landed unit of fish. Kilograms per tonne of landed fish.
- net calorific value: 42.7 MJ/kg; name net_cal_value; triangular min 41.6275, mostLikely 42.9346, max 43.5379, pedigree (3,5,3,5,5)
  Net calorific value of marine diesel oil (MDO)

## Reference product
- landed hake, fresh: 1 kg; By-product classification allocatable product; CPC 04241: Wild fish of Gadiformes, live, fresh or chilled; lognormal variance with pedigree 0.0046, pedigree (1,1,1,1,1)
  production volume 4.807e6 kg
  properties: ash content 0.013 kg, carbon allocation 0.25126 kg, carbon content 0.457294, carbon content, non-fossil 0.457294, dry mass 0.54945 kg, energy content 4.3 MJ, fat content 0.012, price 1.17 EUR2005, protein content 0.166, water content 0.82, water in wet mass 0.45055 kg, wet mass 1 kg

## Inputs from technosphere
- antifouling paint emissions: -0.0001344 kg; lognormal variance with pedigree 0.044, pedigree (3,1,3,1,1)
  properties: dry mass 1 kg, wet mass 1 kg
- demersal fish, fresh: -0.12 kg; lognormal variance with pedigree 0.0046, pedigree (3,1,3,1,1)
  properties: ash content 0.015 kg, carbon content, non-fossil 0.466681, dry mass 0.56397 kg, energy content 3.914 MJ, fat content 0.039, price 0.539258 EUR2005, protein content 0.181, water content 0.77316, wet mass 1 kg
- diesel, burned in fishing vessel: 17.6949 MJ; lognormal variance with pedigree 0.0046, pedigree (3,1,5,1,1)
- lubricating oil: 0.000896 kg; lognormal variance with pedigree 0.044, pedigree (3,1,5,1,1)
  properties: carbon content, fossil 0.75, dry mass 1 kg, heating value, net 40.2 MJ, wet mass 1 kg
- trawler maintenance, steel: 0.0147343 kg; lognormal variance with pedigree 0.304, pedigree (3,1,5,1,1)
- trawler, steel: 0.0147343 kg; lognormal variance with pedigree 0.304, pedigree (3,1,5,1,1)
  properties: lifetime 30 year, lifetime capacity [h] 48000 hour
- waste mineral oil: -0.000896 kg; lognormal variance with pedigree 0.044, pedigree (3,1,3,1,1)
  properties: carbon content, fossil 0.864444, dry mass 0.9 kg, heating value, net 34.7 MJ, water content 0.111111, wet mass 1 kg

## Inputs from nature
- Fish, demersal, in ocean [natural resource, biotic]: 1.244 kg; lognormal variance with pedigree 0.0046, pedigree (3,1,5,1,1)

## Emissions to nature
- Methane, chlorodifluoro-, HCFC-22 [air, non-urban air or from high stacks]: 0.0003808 kg; lognormal variance with pedigree 0.044, pedigree (3,1,5,1,1)
- Discarded fish, demersal, to ocean [water, ocean]: 0.124 kg; lognormal variance with pedigree 0.0046, pedigree (3,1,5,1,1)

## Sampling procedure
4 vessels in 2011. No feasible data on the size of the fleet.

## Extrapolations
The use of these data is probably also valid for other industrial hake fisheries along the southern African coast.
