# hydrochloric acid production, from the reaction of hydrogen with chlorine

Dataset: EcoSpold 2, unit process
Geography: RoW
Time period: 1997-01-01 to 2022-12-31
Technology level: current
Classification: ISIC rev.4 ecoinvent: 2011:Manufacture of basic chemicals
Synonyms: Hydrogen chloride; Muriatic acid; Acide chlorhydrique; Chlorohydric acid; 7647-01-0
Scenario: Business-as-Usual
System model: Substitution, consequential, long-term
Generated by: Mike Chudacoff
Published in: Althaus H.-J. 2007
Database: ecoinvent
isCopyrightProtected: true
accessRestrictedTo: 1

## General comment
This dataset represents the production of 1 kg of hydrochloric acid via the combustion of chlorine with hydrogen. Hydrogen chloride (HCl) is a colorless to yellowish fuming liquid with a sharp, pungent odor. It is a strong highly corrosive acid. The main applications for HCl are the following:
- Acidizing (activation) of petroleum wells
- Manufacture of dyes, phenols and plastics
- Ore reduction (manganese, radium, vanadium, tantalum, tin and tungsten)
- Food processing (corn, syrup, sodium glutamate)
- Pickling and metal cleaning
- Industrial acidizing
- Water treatment
- Resin regeneration and demineralizers
In this dataset, the amounts of raw materials and emissions are estimated based on stoichiometric calculations. Electricity consumption is approximated based on data from a large chemical factory (Gendorf 2016).
References:
Althaus H.-J., Chudacoff M., Hischier R., Jungbluth N., Osses M. and Primas A. (2007) Life Cycle Inventories of Chemicals. ecoinvent report No. 8, v2.0. EMPA Dübendorf, Swiss Centre for Life Cycle Inventories, Dübendorf, CH.
Gendorf (2016) Umwelterklärung 2015, Werk Gendorf Industriepark, www.gendorf.de.

## Included activities start
The activity starts when the raw materials enter the process.

## Included activities end
This activity ends with the production of hydrochloric acid. The dataset includes the input materials, energy uses, infrastructure and emissions.

## Geography
The data in this dataset are not geography-specific. Some values are based on data from a large chemical factory located in Germany. These are assumed to be valid for this geography.

## Technology
HCl can be either directly prepared or generated as a by-product from a number of reactions. This dataset represents the production of HCl via the combustion of chlorine with hydrogen gas. The process involves burning hydrogen gas and chlorine in a gas combustion chamber, producing hydrogen chloride gas. The hydrogen chloride gas then passes through a cooler to an absorber where process water is introduced, producing aqueous hydrochloric acid.
H2 + Cl2 -> 2 HCl (exothermic reaction)
References:
Althaus H.-J., Chudacoff M., Hischier R., Jungbluth N., Osses M. and Primas A. (2007) Life Cycle Inventories of Chemicals. ecoinvent report No. 8, v2.0. EMPA Dübendorf, Swiss Centre for Life Cycle Inventories, Dübendorf, CH.

## Time period
The data in this dataset come from different years, but overall form the most realistic picture of the production. Some values are based on data published by the Gendorf factory that were collected between 2011 and 2015. The time period has been adjusted accordingly. For more details, see the comments of the exchanges.

## Reference product
- hydrochloric acid, without water, in 30% solution state: 1 kg; By-product classification allocatable product; CPC 34: Basic chemicals
  production volume 1.43253e10 kg
  properties: carbon allocation 0 kg, carbon content 0, carbon content, fossil 0, carbon content, non-fossil 0, dry mass 1 kg, heating value, net 3.32 MJ, price 0.127 EUR2005, water content 0, water in wet mass 0 kg, wet mass 1 kg

## Inputs from technosphere
- chemical factory, organics: 4e-10 unit; lognormal variance with pedigree 0.3098, pedigree (2,3,2,4,3)
- chlorine, liquid: 0.975 kg; lognormal variance with pedigree 0.022, pedigree (3,5,2,5,1)
  properties: dry mass 1 kg, wet mass 1 kg
- electricity, medium voltage: 0.0398311, 0.00413586, 0.00149029, 0.0189346, 0.328633, 0.00147905, 0.021496 kWh (7 suppliers, which the file names only by identifier); sum of these 0.416 kWh; lognormal variance with pedigree 0.0104, pedigree (2,3,2,4,3)
- hydrogen, liquid: 0.027 kg; lognormal variance with pedigree 0.022, pedigree (3,5,2,5,1)
  properties: dry mass 1 kg, heating value, net 120.21 MJ, wet mass 1 kg
- nitrogen, liquid: 0.019 kg; lognormal variance with pedigree 0.0104, pedigree (2,3,2,4,3)
  properties: dry mass 1 kg, wet mass 1 kg

## Emissions to nature
- Chlorine [air, urban air close to ground]: 0.0019 kg; lognormal variance with pedigree 0.0206, pedigree (4,3,2,5,1)
- Nitrogen [air, unspecified]: 0.019 kg; lognormal variance with pedigree 0.0104, pedigree (2,3,2,4,3)

## Sampling procedure
Data based on estimations. Some values are calculated based on data from a large chemical factory located in Germany. For more details, see the comments of the exchanges.

## Extrapolations
This dataset has been copied from an original dataset covering the geography RER. The uncertainty has been adjusted accordingly.

## Review by Emilia Moreno Ruiz 2017-08-08
This dataset was additionally reviewed in a separate review process by Eric Johnson of Atlantic Consulting as well as Emilia Moreno Ruiz and Gregor Wernet of ecoinvent.
