# electronics production, for control units

Dataset: EcoSpold 2, unit process
Geography: RoW
Time period: 1990-01-01 to 2022-12-31
Technology level: current
Classification: ISIC rev.4 ecoinvent: 2710:Manufacture of electric motors, generators, transformers and electricity di
Classification: EcoSpold01Categories: construction processes/buildings
Tags: ConvertedDataset
Scenario: Business-as-Usual
System model: Substitution, consequential, long-term
Generated by: Roland Hischier
Published in: Althaus H.-J. 2007
Database: ecoinvent
isCopyrightProtected: true
accessRestrictedTo: 1

## General comment
The control unit has a composition of 46% steel (housing), 32% plastics, 14% printed wiring boards and 8% cables (various types).
[This dataset was already contained in the ecoinvent database version 2. It was not individually updated during the transfer to ecoinvent version 3. Life Cycle Impact Assessment results may still have changed, as they are affected by changes in the supply chain, i.e. in other datasets. This dataset was generated following the ecoinvent quality guidelines for version 2. It may have been subject to central changes described in the ecoinvent version 3 change report (http://www.ecoinvent.org/database/ecoinvent-version-3/reports-of-changes/), and the results of the central updates were reviewed extensively. The changes added e.g. consistent water flows and other information throughout the database. The documentation of this dataset can be found in the ecoinvent reports of version 2, which are still available via the ecoinvent website. The change report linked above covers all central changes that were made during the conversion process.]

## Included activities end
This module includes the composition of a typical control unit for devices in the industry. Included are the materials of the different components (housing, cables, mounted PWB). Not included are the final production efforts out of the components to the control unit.

## Geography
Data used has no specific geographical origin (literature values).

## Technology
estimated composition of the electronics for control units in the industry, based on literature

## Reference product
- electronics, for control units: 1 kg; By-product classification allocatable product; CPC 482: Instruments and appliances for measuring, checking, testing, navigating and other purposes, except optical instr[…]
  production volume 2.67763 kg
  properties: carbon allocation 0.337281 kg, carbon content 0.337281, carbon content, fossil 0.337146, carbon content, non-fossil 0.00013442, dry mass 1 kg, price 40.7164 EUR2005, water content 0, water in wet mass 0 kg, wet mass 1 kg

## Inputs from technosphere
- cable, connector for computer, without plugs: 0.123 m; lognormal variance with pedigree 0.058, pedigree (3,5,5,5,3)
  properties: carbon content, fossil 0.359823, dry mass 0.065 kg, wet mass 0.065 kg
- cable, network cable, category 5, without plugs: 1.11 m; lognormal variance with pedigree 0.058, pedigree (3,5,5,5,3)
  properties: carbon content, fossil 0.203917, dry mass 0.036 kg, wet mass 0.036 kg
- cable, ribbon cable, 20-pin, with plugs: 0.032 kg; lognormal variance with pedigree 0.058, pedigree (3,5,5,5,3)
  properties: carbon content, fossil 0.648653, dry mass 1 kg, wet mass 1 kg
- injection moulding: 0.32 kg; lognormal variance with pedigree 0.058, pedigree (3,5,5,5,3)
- polyethylene, high density, granulate: 0.32193 kg; lognormal variance with pedigree 0.058, pedigree (3,5,5,5,3)
  properties: carbon content, fossil 0.857143, dry mass 1 kg, heating value, net 42.47 MJ, wet mass 1 kg
- printed wiring board mounting facility: 2.08e-7 unit; lognormal variance with pedigree 0.538, pedigree (4,5,5,5,5)
- printed wiring board, surface mounted, unspecified, Pb containing: 0.021 kg; lognormal variance with pedigree 0.058, pedigree (3,5,5,5,3)
  properties: carbon content, fossil 0.132522, dry mass 1 kg, wet mass 1 kg
- printed wiring board, surface mounted, unspecified, Pb free: 0.049 kg; lognormal variance with pedigree 0.058, pedigree (3,5,5,5,3)
  properties: carbon content, fossil 0.132522, dry mass 1 kg, wet mass 1 kg
- printed wiring board, through-hole mounted, unspecified, Pb containing: 0.021 kg; lognormal variance with pedigree 0.058, pedigree (3,5,5,5,3)
  properties: carbon content, fossil 0.132522, dry mass 1 kg, wet mass 1 kg
- printed wiring board, through-hole mounted, unspecified, Pb free: 0.049 kg; lognormal variance with pedigree 0.058, pedigree (3,5,5,5,3)
  properties: carbon content, fossil 0.132522, dry mass 1 kg, wet mass 1 kg
- sheet rolling, steel: 0.46 kg; lognormal variance with pedigree 0.058, pedigree (3,5,5,5,3)
- steel, low-alloyed, hot rolled: 0.46 kg; lognormal variance with pedigree 0.058, pedigree (3,5,5,5,3)
  properties: carbon content, fossil 0.005, dry mass 1 kg, wet mass 1 kg

## Sampling procedure
own estimations & literature

## Extrapolations
see Geography and Technology This dataset has been copied from an original dataset covering the geography RER. The uncertainty has been adjusted accordingly.

## Review by Rolf Frischknecht 2007-11-08
passed.
