# pear production

Dataset: EcoSpold 2, unit process
Geography: RoW
Time period: 2009-01-01 to 2022-12-31
Technology level: current
Classification: ISIC rev.4 ecoinvent: 0124:Growing of pome fruits and stone fruits
Tags: WFLDB
Scenario: Business-as-Usual
System model: Substitution, consequential, long-term
Generated by: [System]
Database: ecoinvent
isCopyrightProtected: true
accessRestrictedTo: 1

## General comment
This dataset is a weighted average of the regional datasets, with weights based on production volume of the reference product. Detailed comments and sources about the exchanges can be found in the regional datasets.
The geographicalCorrelation score of every pedigree matrix of was changed to '5'.
Sum of regional production volumes: 1.674e+10 kg
CN: PV = 1.570e+10 kg; weight = 0.938
AR: PV = 7.605e+8 kg; weight = 0.04543
BE: PV = 2.773e+8 kg; weight = 0.01656
Yield of the global dataset = 28 t / ha, calculated as a weighted average of the regional yields.
The comments below were part of the CN regional dataset.
This dataset represents the production of 1 kg of pear. The average yield from 2009 - 2012 is 13.9 t/ha. The data are representative for pear production in China used for the export market. Mineral NPK fertiliser input is 150-40-40 kg/ha. Organic fertilisers applied amount to 1.11 m3/ha of liquid manure and 0.88 t/ha of solid manure. Total active ingredients (a.i.) applied as pesticides amount to 11.82 kg a.i./ha.
The dataset was modelled within the project 'World Food LCA database (WFLDB)'. The aim of this project was to provide inventories of a broad variety of agricultural products and processes and to cover for each product at least 50% of the global export market. The export share of pear produced in China amounts to 17% of the global export (tonnage exported in 2010). The production system regarded in this dataset aimed at representing pear produced in China for the export market.
PEF-Quality: data quality rating (DQR) = 3.0 (i.e. good quality). This dataset refers to an average situation; for specific situations exchanges might differ substantially due to site specific parameters

## Included activities start
This activity starts with the nursery producing fruit tree seedlings, i.e. grafted young trees to be planted.

## Included activities end
This activity ends with the waste treatment after the clearing of the orchard (rooting up the trees). The dataset includes all activities of a year in a year in the productive phase of the orchard including the establishment phase per year of lifetime (20 years, 1250 trees/ha planted), the clearing of the orchard including waste treatment.
The establishment phase of the orchard includes tree nursery, soil cultivation, planting trees, sowing grass, installation of trellis system (posts and wires) and irrigation. Fertiliser and pesticide use in a year of the establishment phase is assumed to be half of the amount of a year in the productive phase.
The productive phase of the orchard includes machine operations, corresponding infrastructure, fuel use and sheds. Machine operations in the productive phase are: soil cultivation (mulching, mowing), fertiliser and pesticide application, harvesting and irrigation. Further, direct field emissions and land use change are included. At the end of the productive phase the orchard is cleared by rooting up the trees.
Heavy metal uptake by the crop is considered.
The inputs of seedlings, fertilisers and pesticides as well as packaging of fertilisers and pesticides are considered. fertilisers and pesticides are considered. The dataset doesn't include emissions from manure storage because these are within the system boundary of animal production.
Statistical data from FAO used to assess land use change is incomplete for China. The original land use of 40.9% of annual cropland and 100% of perennial cropland transformed in the last 20 years is unknown. Land use change impacts may therefore be underestimated.

## Reference product
- pear: 1 kg; By-product classification allocatable product; CPC 01342: Pears and quinces
  production volume 5.4744e9 kg
  properties: carbon allocation 0.258853 kg, carbon content 0.476186, carbon content, fossil 0, carbon content, non-fossil 0.476186, dry mass 0.543596 kg, price 0.43 EUR2005, water content 0.8396, water in wet mass 0.456404 kg, wet mass 1 kg

## Inputs from technosphere
- ammonia, anhydrous, liquid: 2.56016e-8, 2.44265e-7, 2.70753e-6, 1.14449e-7, 2.49318e-7 kg (5 suppliers, which the file names only by identifier); sum of these 3.34116e-6 kg; lognormal variance with pedigree 0.118177, pedigree (2,1,4,5,1)
  properties: dry mass 1 kg, wet mass 1 kg
- ammonium nitrate: 0.00417001, 0.00160098 kg (2 suppliers, which the file names only by identifier); sum of these 0.00577098 kg; lognormal variance with pedigree 0.118177, pedigree (2,1,4,5,1)
  properties: dry mass 1 kg, wet mass 1 kg
- ammonium sulfate: 1.02945e-5 kg; lognormal variance with pedigree 0.118177, pedigree (2,1,4,5,1)
  properties: dry mass 1 kg, wet mass 1 kg
- application of plant protection product, by field sprayer: 0.000518968 ha; lognormal variance with pedigree 0.118664, pedigree (2,2,4,5,1)
- cyclic N-compound: 6.046e-6 kg; lognormal variance with pedigree 0.118664, pedigree (2,2,4,5,1)
  properties: carbon content, fossil 0.641962, dry mass 1 kg, wet mass 1 kg
- dithiocarbamate-compound: 0.000353057 kg; lognormal variance with pedigree 0.118664, pedigree (2,2,4,5,1)
  properties: carbon content, fossil 0.179339, dry mass 1 kg, wet mass 1 kg
- establishing orchard: 0.00413692 unit; lognormal variance with pedigree 0.118177, pedigree (2,1,4,5,1)
- fertilising, by broadcaster: 0.000289522 ha; lognormal variance with pedigree 0.118177, pedigree (2,1,4,5,1)
- fruit tree seedling, for planting: 0.00413692 unit; lognormal variance with pedigree 0.118177, pedigree (2,1,4,5,1)
  properties: carbon content, non-fossil 0.439481, dry mass 0.578035 kg, water content 0.73, wet mass 1 kg
- glyphosate: 3.49848e-5 kg; lognormal variance with pedigree 0.118664, pedigree (2,2,4,5,1)
  properties: carbon content, fossil 0.214286, dry mass 1 kg, wet mass 1 kg
- inorganic nitrogen fertiliser, as N: 6.32053e-6, 6.78329e-9, 2.49714e-9, 2.64287e-7, 6.25777e-8, 1.71222e-7, 1.70738e-7, 4.58431e-8, 8.2443e-8, 7.99831e-9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 kg (60 suppliers, which the file names only by identifier); sum of these 6.56076e-5 kg; lognormal variance with pedigree 0.118177, pedigree (2,1,4,5,1)
  properties: dry mass 1 kg, wet mass 1 kg
- inorganic phosphorus fertiliser, as P2O5: 3.32285e-6, 2.04154e-6, 1.04468e-5, 4.4614e-7, 1.10643e-6, 1.50974e-5, 1.83631e-5, 2.24854e-7, 1.46155e-7, 1.18138e-6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 kg (60 suppliers, which the file names only by identifier); sum of these 0.00272349 kg; lognormal variance with pedigree 0.118177, pedigree (2,1,4,5,1)
  properties: dry mass 1 kg, wet mass 1 kg
- inorganic potassium fertiliser, as K2O: 3.96427e-10, 5.45515e-7, 5.83165e-8, 8.3667e-9, 6.10602e-7, 4.92717e-8, 3.94698e-6, 6.25938e-9, 2.83758e-8, 4.24594e-9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 kg (60 suppliers, which the file names only by identifier); sum of these 6.56422e-6 kg; lognormal variance with pedigree 0.118177, pedigree (2,1,4,5,1)
  properties: dry mass 1 kg, wet mass 1 kg
- irrigation: 0.216332, 0.00670853, 0.000757117, 0.000284756, 0.00044288, 0.0266151, 0.0112337, 0.00221524, 0.115243, 0.000982745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 m3 (15 suppliers, which the file names only by identifier); sum of these 0.38615 m3; lognormal variance with pedigree 0.118177, pedigree (2,1,4,5,1)
  properties: dry mass 0.11 kg, water content 9089.91, wet mass 1000 kg
- liquid manure spreading, by vacuum tanker: 7.73847e-5 m3; lognormal variance with pedigree 0.118177, pedigree (2,1,4,5,1)
- manure, liquid, cattle: 0.0423314 kg; lognormal variance with pedigree 0.118177, pedigree (2,1,4,5,1)
  properties: carbon content, non-fossil 0.68, dry mass 0.075 kg, water content 12.333, wet mass 1 kg
- manure, liquid, swine: 0.0308757 kg; lognormal variance with pedigree 0.118177, pedigree (2,1,4,5,1)
  properties: carbon content, non-fossil 0.64, dry mass 0.05 kg, water content 19, wet mass 1 kg
- manure, solid, cattle: 0.0412218 kg; lognormal variance with pedigree 0.118177, pedigree (2,1,4,5,1)
  properties: carbon content, non-fossil 0.441, dry mass 0.22 kg, water content 3.5454, wet mass 1 kg
- mowing, by rotary mower: 0.000276783 ha; lognormal variance with pedigree 0.118177, pedigree (2,1,4,5,1)
- mulching: 0.000345979 ha; lognormal variance with pedigree 0.118177, pedigree (2,1,4,5,1)
- organophosphorus-compound, unspecified: 6.75237e-5 kg; lognormal variance with pedigree 0.118664, pedigree (2,2,4,5,1)
  properties: carbon content, fossil 0.260898, dry mass 1 kg, wet mass 1 kg
- packaging, for fertilisers: 0.0313147 kg; lognormal variance with pedigree 0.0512, pedigree (4,3,4,5,4)
  properties: carbon content, fossil 0.825301, dry mass 1 kg, heating value, net 25.01 MJ, price 0.0642 EUR2005, wet mass 1 kg
- packaging, for pesticides: 0.00165163 kg; lognormal variance with pedigree 0.0512, pedigree (4,3,4,5,4)
  properties: carbon content, fossil 0.85714, dry mass 1 kg, heating value, net 25.97 MJ, price 0.0642 EUR2005, wet mass 1 kg
- phenoxy-compound: 7.93063e-6 kg; lognormal variance with pedigree 0.118664, pedigree (2,2,4,5,1)
  properties: carbon content, fossil 0.532559, dry mass 1 kg, wet mass 1 kg
- planting tree: 0.00413692 unit; lognormal variance with pedigree 0.118177, pedigree (2,1,4,5,1)
- potassium chloride: 0.0043111 kg; lognormal variance with pedigree 0.118177, pedigree (2,1,4,5,1)
  properties: dry mass 1 kg, wet mass 1 kg
- potassium sulfate: 2.93614e-5 kg; lognormal variance with pedigree 0.118177, pedigree (2,1,4,5,1)
  properties: dry mass 1 kg, wet mass 1 kg
- poultry manure, dried: 0.0202604 kg; lognormal variance with pedigree 0.118177, pedigree (2,1,4,5,1)
  properties: cadmium content 2.92e-7, carbon content, non-fossil 0.33389, copper content 4.38e-5, dry mass 0.865 kg, lead content 2.92e-6, mercury content 2e-7, nickel content 4e-5, nitrogen content 0.532, phosphorus content 0.0167, potassium content 0.024, water content 0.156069, wet mass 1 kg, zinc content 0.000349
- poultry manure, fresh: 0.0020888 kg; lognormal variance with pedigree 0.118177, pedigree (2,1,4,5,1)
  properties: carbon content, non-fossil 0.33389, dry mass 0.38 kg, water content 1.63158, wet mass 1 kg
- solid manure loading and spreading, by hydraulic loader and spreader: 0.0614822 kg; lognormal variance with pedigree 0.118177, pedigree (2,1,4,5,1)
- sulfur: 0.000356275 kg; lognormal variance with pedigree 0.118664, pedigree (2,2,4,5,1)
  properties: dry mass 1 kg, wet mass 1 kg
- transport, tractor and trailer, agricultural: 0.0019919, 8.1e-6 metric ton*km (2 suppliers, which the file names only by identifier); sum of these 0.002 metric ton*km; lognormal variance with pedigree 0.156439, pedigree (4,1,4,5,1)
- trellis system, wooden poles, soft wood, tar impregnated: 6.91957e-5 ha; lognormal variance with pedigree 0.118177, pedigree (2,1,4,5,1)
- urea: 0.00194692, 0.0153941 kg (2 suppliers, which the file names only by identifier); sum of these 0.017341 kg; lognormal variance with pedigree 0.118177, pedigree (2,1,4,5,1)
  properties: carbon content, fossil 0.2, dry mass 1 kg, wet mass 1 kg
- waste wood, untreated: -3.21841e-5, -0.00096194, -0.000297065, -2.27621e-5, -0.000321544, -0.000105915, -6.93875e-5, -0.000125624, -0.000186698, -0.00563835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 kg (41 suppliers, which the file names only by identifier); sum of these -0.0922379 kg; lognormal variance with pedigree 0.118177, pedigree (2,1,1,5,1)
  properties: carbon content, non-fossil 0.48632, dry mass 0.8 kg, heating value, net 13.99 MJ, water content 0.25, wet mass 1 kg

## Inputs from nature
- Carbon dioxide, in air [natural resource, in air]: 0.297207 kg; lognormal variance with pedigree 0.00784984, pedigree (2,2,4,5,1)
- Energy, gross calorific value, in biomass [natural resource, biotic]: 3.14842 MJ; lognormal variance with pedigree 0.00784984, pedigree (2,2,4,5,1)
- Occupation, permanent crop, irrigated [natural resource, land]: 0.693825 m2*year; lognormal variance with pedigree 0.0140616, pedigree (2,1,4,5,1)
- Transformation, from permanent crop, irrigated [natural resource, land]: 0.0345979 m2; lognormal variance with pedigree 0.0382144, pedigree (2,1,4,5,1)
- Transformation, to permanent crop, irrigated [natural resource, land]: 0.0345979 m2; lognormal variance with pedigree 0.0382144, pedigree (2,1,4,5,1)

## Emissions to nature
- Ammonia [air, non-urban air or from high stacks]: 0.00218103 kg; lognormal variance with pedigree 0.0387216, pedigree (2,2,4,5,1)
- Carbon dioxide, fossil [air, non-urban air or from high stacks]: 0.0127167 kg; lognormal variance with pedigree 0.00784984, pedigree (2,2,4,5,1)
- Carbon dioxide, from soil or biomass stock [air, non-urban air or from high stacks]: 0.00245946 kg; normal variance with pedigree 0.5072, pedigree (3,3,5,5,2)
- Dinitrogen monoxide [air, non-urban air or from high stacks]: 0.000244684 kg; lognormal variance with pedigree 0.118664, pedigree (2,2,4,5,1)
- Nitrogen oxides [air, non-urban air or from high stacks]: 0.000409686 kg; lognormal variance with pedigree 0.118664, pedigree (2,2,4,5,1)
- Water [air, non-urban air or from high stacks]: 0.184363 m3; lognormal variance with pedigree 0.118177, pedigree (2,1,4,5,1)
- 2,4-D [soil, agricultural]: 7.93063e-6 kg; lognormal variance with pedigree 0.118664, pedigree (2,2,4,5,1)
- Cadmium II [soil, agricultural]: 1.24255e-7 kg
- Chlorpyrifos methyl [soil, agricultural]: 6.75237e-5 kg; lognormal variance with pedigree 0.118664, pedigree (2,2,4,5,1)
- Chromium III [soil, agricultural]: 2.35725e-7 kg
- Copper ion [soil, agricultural]: -1.16993e-7 kg
- Glyphosate [soil, agricultural]: 3.49848e-5 kg; lognormal variance with pedigree 0.118664, pedigree (2,2,4,5,1)
- Lead II [soil, agricultural]: 1.16287e-7 kg
- Mancozeb [soil, agricultural]: 0.000353057 kg; lognormal variance with pedigree 0.0387216, pedigree (2,2,4,5,1)
- Mercury II [soil, agricultural]: 7.15741e-9 kg
- Myclobutanil [soil, agricultural]: 6.046e-6 kg; lognormal variance with pedigree 0.0387216, pedigree (2,2,4,5,1)
- Nickel II [soil, agricultural]: 3.1377e-7 kg
- Sulfur [soil, agricultural]: 0.000356275 kg; lognormal variance with pedigree 0.0387216, pedigree (2,2,4,5,1)
- Zinc II [soil, agricultural]: 2.92072e-6 kg
- Cadmium II [water, ground-]: 2.59676e-9 kg; lognormal variance with pedigree 0.350938, pedigree (2,2,4,5,1)
- Cadmium II [water, surface water]: 1.71956e-9 kg; lognormal variance with pedigree 0.350938, pedigree (2,2,4,5,1)
- Chromium III [water, ground-]: 1.28661e-6 kg; lognormal variance with pedigree 0.350938, pedigree (2,2,4,5,1)
- Chromium III [water, surface water]: 1.77028e-7 kg; lognormal variance with pedigree 0.350938, pedigree (2,2,4,5,1)
- Copper ion [water, ground-]: 2.24934e-7 kg; lognormal variance with pedigree 0.350938, pedigree (2,2,4,5,1)
- Copper ion [water, surface water]: 2.64072e-7 kg; lognormal variance with pedigree 0.350938, pedigree (2,2,4,5,1)
- Lead II [water, ground-]: 6.61496e-9 kg; lognormal variance with pedigree 0.350938, pedigree (2,2,4,5,1)
- Lead II [water, surface water]: 2.96372e-8 kg; lognormal variance with pedigree 0.350938, pedigree (2,2,4,5,1)
- Mercury II [water, ground-]: 2.52611e-10 kg; lognormal variance with pedigree 0.350938, pedigree (2,2,4,5,1)
- Mercury II [water, surface water]: 4.6503e-10 kg; lognormal variance with pedigree 0.350938, pedigree (2,2,4,5,1)
- Nickel II [water, ground-]: 5.97212e-11 kg; lognormal variance with pedigree 0.350938, pedigree (2,2,4,5,1)
- Nickel II [water, surface water]: 1.14069e-7 kg; lognormal variance with pedigree 0.350938, pedigree (2,2,4,5,1)
- Nitrate [water, ground-]: 0.0119842 kg; lognormal variance with pedigree 0.169866, pedigree (2,2,4,5,1)
- Phosphate [water, ground-]: 1.27765e-5 kg; lognormal variance with pedigree 0.169866, pedigree (2,2,4,5,1)
- Phosphate [water, surface water]: 5.89403e-5 kg; lognormal variance with pedigree 0.169866, pedigree (2,2,4,5,1)
- Phosphorus [water, surface water]: 4.99808e-6 kg; lognormal variance with pedigree 0.169866, pedigree (2,2,4,5,1)
- Water [water, ground-]: 0.0403577 m3; lognormal variance with pedigree 0.118177, pedigree (2,1,4,5,1)
- Water [water, surface water]: 0.161427 m3; lognormal variance with pedigree 0.118177, pedigree (2,1,4,5,1)
- Zinc II [water, ground-]: 1.40965e-6 kg; lognormal variance with pedigree 0.350938, pedigree (2,2,4,5,1)
- Zinc II [water, surface water]: 3.27774e-7 kg; lognormal variance with pedigree 0.350938, pedigree (2,2,4,5,1)

## Sampling procedure
WFLDB Methodological Guidelines for the Life Cycle Inventory of Agricultural Products in the latest version, available at: http://www.quantis-intl.com/microsites/wfldb. Data sources: Data were categorised from level 0 (L0) to level (L4) as follows: L0 = estimate, proxy; L1 = statistical data (e.g. FAOSTAT); L2 = L1 adapted to crop and country;L3 = literature data or L1 resp. L2 data approved by experts; medium detailing (e.g. kg of total N-fertiliser); L4 = L3 data of higher detailing as L3 data (e.g. kg of a specific N-fertiliser such as Ammonium-Nitrate or Urea).In this dataset data were obtained for yield: L3; Fertilisers: L4; Pesticides: L0; Machinery: L0; Irrigation L2. For information regarding the calculation of individual exchanges see supporting documentation WFLDB-Documentation.pdf.

## Extrapolations
The amount of the exchanges are weighted average of regional datasets.

## Review by Assumpció ANTON 2016-05-30
Be aware that the use of statistics in input calculations could provide some specific inputs not common for specific crops, this should be corrected if better information is available and better reflexed in DQR . Currently, I would dissent for some of good marks provided, being a revision of criteria applied advisable.
Pesticides will need to be amended periodically checking for update of pesticides' ban.
