# solar collector system installation, Cu flat plate collector, one-family house, combined system

Dataset: EcoSpold 2, unit process
Geography: CH
Time period: 2002-01-01 to 2022-12-31
Technology level: current
Classification: ISIC rev.4 ecoinvent: 4322:Plumbing, heat and air-conditioning installation
Classification: EcoSpold01Categories: solar collector systems/systems
Tags: ConvertedDataset
Scenario: Business-as-Usual
System model: Substitution, consequential, long-term
Generated by: Niels Jungbluth
Published in: Jungbluth, N. 2007
Database: ecoinvent
isCopyrightProtected: true
accessRestrictedTo: 1

## General comment
Solar system with a flat plate collector on a one family house with a combined system for hot water and heating
[This dataset was already contained in the ecoinvent database version 2. It was not individually updated during the transfer to ecoinvent version 3. Life Cycle Impact Assessment results may still have changed, as they are affected by changes in the supply chain, i.e. in other datasets. This dataset was generated following the ecoinvent quality guidelines for version 2. It may have been subject to central changes described in the ecoinvent version 3 change report (http://www.ecoinvent.org/database/ecoinvent-version-3/reports-of-changes/), and the results of the central updates were reviewed extensively. The changes added e.g. consistent water flows and other information throughout the database. The documentation of this dataset can be found in the ecoinvent reports of version 2, which are still available via the ecoinvent website. The change report linked above covers all central changes that were made during the conversion process.]

## Included activities end
Production and disposal of a complete solar system (excluding auxiliary heating). Including different components, heat exchange fluid, installation copper pipes, transports of parts to CH, delivery with a van and montage on the roof.

## Geography
Solar collector system operated in CH.

## Technology
Solar collector system for room heating and hot water installed on the roof of a house.

## Time period
Material data have been investigated for a collector produced in 2002. Data for energy uses during production have been investigated for 2001.

## Parameters
- fraction, process water, to air: 0.15 dimensionless; name fraction_PW_to_air; lognormal variance with pedigree 0.092025, pedigree (4,4,3,2,4)
  Literature value. In case when no industry/process specific data are available, default evaporation fraction value is used. This value is 15% and is based on literature (Statistics Canada, 2007 & Shaffer, K.H., 2008, Consumptive water use in the Great Lakes Basin, USGS & Shiklomanov, 2003, World Water Resources at the Beginning of the 21st Century) and has been approved by an expert.
- fraction, water, completely softened, to air: 0.15 dimensionless; name fraction_WCS_to_air; = fraction_PW_to_air; lognormal variance with pedigree 0.092025, pedigree (4,4,3,2,4)
  Calculated value. See comment in the other parametres present in this dataset. Water, completely softened is considered to be always used as process water, thus process water fractions to air are applied to all water, completely softened input flows to calculate the amount of water consumed in the processes.

## Reference product
- solar collector system, Cu flat plate collector, one-family house, combined system: 1 unit; By-product classification allocatable product; CPC 54631: Heating equipment installation services
  production volume 0.0336675 unit
  properties: carbon allocation 0 kg, carbon content 0, price 42692 EUR2005

## Inputs from technosphere
- copper, cathode: 16 kg; lognormal variance with pedigree 0.022, pedigree (3,5,5,1,1)
  properties: dry mass 1 kg, wet mass 1 kg
- drawing of pipe, steel: 16 kg; lognormal variance with pedigree 0.03, pedigree (3,5,5,1,3)
- expansion vessel, 25l: 1 unit; lognormal variance with pedigree 0.022, pedigree (3,5,5,1,1)
- flat plate solar collector, Cu absorber: 12.3 m2; lognormal variance with pedigree 0.022, pedigree (3,5,5,1,1)
- heat carrier liquid, 40% C3H8O2: -0.104 m3; lognormal variance with pedigree 0.022, pedigree (3,5,3,1,1)
  properties: carbon content, fossil 3, dry mass 6.31366 kg, price 1.08656 EUR2005, water content 157.387, wet mass 1000 kg
- heat storage, 2000l: 0.87 unit; lognormal variance with pedigree 0.022, pedigree (3,5,5,1,1)
- propylene glycol, liquid: 43.6 kg; lognormal variance with pedigree 0.022, pedigree (3,5,5,1,1)
  properties: carbon content, fossil 0.473684, dry mass 1 kg, heating value, net 27.09 MJ, wet mass 1 kg
- pump, 40W: 3.12 unit; lognormal variance with pedigree 0.022, pedigree (3,5,5,1,1)
- tube insulation, elastomere: 5.2 kg; lognormal variance with pedigree 0.022, pedigree (3,5,5,1,1)
  properties: carbon content, fossil 0.837817, dry mass 1 kg, heating value, net 25.39 MJ, wet mass 1 kg
- water, completely softened: 60 kg; lognormal variance with pedigree 0.022, pedigree (3,5,5,1,1)
  properties: wet mass 1 kg

## Emissions to nature
- Water [air, unspecified]: 0.009 m3; lognormal variance with pedigree 0.0407, pedigree (2,2,5,1,1)
- Water [water, unspecified]: 0.051 m3; lognormal variance with pedigree 0.0407, pedigree (2,2,5,1,1)

## Sampling procedure
Own simulation.

## Review by Sebastiano Meier 2003-06-16
Passed.
