# hardwood forestry, beech, sustainable forest management

Dataset: EcoSpold 2, unit process
Geography: DE
Time period: 2010-01-01 to 2022-12-31
Technology level: current
Classification: ISIC rev.4 ecoinvent: 0220:Logging
Tags: Swiss brush-up completed; combined production; combined production,
Scenario: Business-as-Usual
System model: Substitution, consequential, long-term
Generated by: Frank Werner
Database: ecoinvent
isCopyrightProtected: true
accessRestrictedTo: 1

## General comment
This dataset covers the production and harvesting of 1 m3 of stemwood, beech, solid, under bark, plus the relative share of enery wood from slash from sustainable forest management as the prevailing management practices in Germany.

For Germany forestry processes for the 4 main tree species are modelled:
• hardwood: beech
• hardwood: oak
• softwood: spruce
• softwood: pine
Table 1-1 lists the parameters of the inventoried tree species and their sources:

## Included activities start
The activity starts with site preparation assuming establishment of the forest via planting, including seedling production and covers all process related to forest management, including site preparation, planting, tending, young growth tending, clearing, thinnings and harvesting operations including the processing of wood fuel to chips, bundles and chopped wood (logs for energy) over one rotation period. It covers also the maintenance and construction of forest roads.

## Included activities end
This activity ends with the assortments at the forest road and includes eventual drying before transportation.

## Parameters
- Bark ratio: 0.1 dimensionless; name bark; lognormal variance with pedigree 0.025, pedigree (1,1,1,1,1)
  share of bark of total volume of trunk (solid wood + bark) for hardwood; U. Luginbühl, personal written communication, HIS
- area forest per m3 wood: 11.9027 m2/m3; name a_transformation_forest; = (10000-a_forest_road)*share_revenues_wood/yield_wood_ub
  area of forest per ha divided by total harvest over one rotation period per hectare
- area forest road: 216 m2/ha; name a_forest_road; = 54*4; lognormal variance with pedigree 0.2506, pedigree (2,1,1,1,1)
  Schweinle, J. and C. Thoroe (2001): Vergleichende Ökobilanzierung der Rohholzproduktion in verschiedenen Forstbetrieben. Mitteilungen der Bundesforschungsanstalt für Forst- und Holzwirtschaft Nr. 204, Kommissionsverlag Max Wiedebusch, Hamburg.
- area forest road in gravel: 216 m2/ha; name a_forest_road_gravel; = a_forest_road; lognormal variance with pedigree 0.2506, pedigree (2,1,1,1,1)
  assumed
- area forest road per m3 wood: 0.262774 m2/m3; name a_transformation_road; = a_forest_road/yield_wood_ub
  area of forest road per ha divided by total harvest over one rotation period per hectare; Albrecht, S., S. Rüter, J. Welling, M. Knauf, U. Mantau, A. Braune, M. Baitz, H. Weimar, S. Sörgel, J. Kreissig, J. Deimling and S. Hellwig (2009): ÖkoPot - Ökologische Potenziale durch Holznutzung gezielt fördern. Abschlussbericht zum BMBF-Projekt FKZ 0330545. Universität Stuttgart, Universität Hamburg, Hamburg.
- bulk density gravel: 1600 kg/m3; name d_gravel; lognormal variance with pedigree 0.2506, pedigree (2,1,1,1,1)
  kg gravel / m3 bulked material
- diesel consumption per kg of gravel used for maintenance of forest roads: 0.043 MJ/kg; name diesel_per_gravel; lognormal variance with pedigree 0.2506, pedigree (2,1,1,1,1)
  diesel consumption of building machines used to maintaine road and distribute new layer of gravel
- forwarding with forwarder per m3: 0.0195 PMH/m3; name forwarding_forwarder; lognormal variance with pedigree 0.2506, pedigree (2,1,1,1,1)
  referring to stemwood; IMPORTANT NOTE: When considering several harvesting systems, e.g. in datasets on national forestry, this parameter is NOT the inverse productivity of the harvesting system but the inverse productivity of the system weighted with the share of the amount harvested by the respective system. This has to be calculated outside EcoEditor. Own calculations based on Klvac, R. and A. Skoupy (2009): Characteristic fuel consumption and exhaust emissions in fully mechanized logging operations. Journal of Forest Research, 14(6): 328-334: referring to Freitas 2004; Skogforsk (2006): Fuel consumption in forestry continues to fall. Results from Skogforsk, Skogforsk, Uppsala; Berg, S. and T. Karjalainen (2003): Comparison of greenhouse gas emissions from forest operations in Finand and Sweden. Forestry, 76(3): 271-284.
- gravel for maintenance of forest roads: 117.723 kg/m3; name m_gravel; = thickness_new_gravel*a_forest_road_gravel*d_gravel*rotation_period/interval_road_maintenance/yield_wood_ub
  adding up all gravel input over one rotation period per m3 of total yield of wood
- harvesting with forestry harvester: 0.0156 year; name harvesting; lognormal variance with pedigree 0.2506, pedigree (2,1,1,1,1)
  (same comment as for forwarding with forwarder per m3)
- moisture content cleft timber: 0.35 dimensionless; name moisture_cleft_timber; lognormal variance with pedigree 0.2506, pedigree (2,1,1,1,1)
  kg water/kg dry mass.
- moisture content pulpwood: 0.8 dimensionless; name moisture_pulpwood; lognormal variance with pedigree 0.2506, pedigree (2,1,1,1,1)
  kg water/kg dry mass. Schweinle, J. and C. Thoroe (2001): Vergleichende Ökobilanzierung der Rohholzproduktion in verschiedenen Forstbetrieben. Mitteilungen der Bundesforschungsanstalt für Forst- und Holzwirtschaft Nr. 204, Kommissionsverlag Max Wiedebusch, Hamburg.
- moisture content sawlogs and veneer logs: 0.7 dimensionless; name moisture_sawlogs; lognormal variance with pedigree 0.2506, pedigree (2,1,1,1,1)
  (same comment as for moisture content pulpwood)
- moisture content wood chips: 0.8 dimensionless; name moisture_wood_chips; lognormal variance with pedigree 0.2506, pedigree (2,1,1,1,1)
  kg water/kg dry mass. Based on Schweinle, J. and C. Thoroe (2001): Vergleichende Ökobilanzierung der Rohholzproduktion in verschiedenen Forstbetrieben. Mitteilungen der Bundesforschungsanstalt für Forst- und Holzwirtschaft Nr. 204, Kommissionsverlag Max Wiedebusch, Hamburg.
- periodicity of maintenance of forest roads: 10 year; name interval_road_maintenance; lognormal variance with pedigree 0.2506, pedigree (2,1,1,1,1)
  interval between two events of maintenance of forest roads
- planting density: 8000 unit; name planting_density; lognormal variance with pedigree 0.2506, pedigree (2,1,1,1,1)
  number of trees per hectare
- power sawing without catalytic converter per m3: 0.383 PMH/m3; name power_sawing; lognormal variance with pedigree 0.2506, pedigree (2,1,1,1,1)
  referring to stemwod; IMPORTANT NOTE: When considering several harvesting systems, e.g. in datasets on national forestry, this parameter is NOT the inverse productivity of the harvesting system but the inverse productivity of the system weighted with the share of the amount harvested by the respective system. This has to be calculated outside EcoEditor. Own calculations based on Klvac, R. and A. Skoupy (2009): Characteristic fuel consumption and exhaust emissions in fully mechanized logging operations. Journal of Forest Research, 14(6): 328-334: referring to Freitas 2004; Skogforsk (2006): Fuel consumption in forestry continues to fall. Results from Skogforsk, Skogforsk, Uppsala; Berg, S. and T. Karjalainen (2003): Comparison of greenhouse gas emissions from forest operations in Finand and Sweden. Forestry, 76(3): 271-284.
- productivity forwarding wood chips from terrain chipper: 70 m3/PMH; name productivity_forwarding_chips_in_stand; lognormal variance with pedigree 0.2506, pedigree (2,1,1,1,1)
  as m3 bulked/ productive machine hour
- productivity mobile chipper: 120 m3/PMH; name productivity_mobile_chipper; lognormal variance with pedigree 0.2506, pedigree (2,1,1,1,1)
  as m3 bulked/ productive machine hour
- productivity terrain chipper: 25 m3/PMH; name productivity_terrain_chipper; lognormal variance with pedigree 0.2506, pedigree (2,1,1,1,1)
  as m3 bulked/ productive machine hour; based on Cremer, T. and B. Velazques-Marti (2007): Evaluation of two harvesting systems for the supply of wood-chips in Norway spurce forest affected by bark beetle. Croation Journal of Forest Engineering, 28(2): 145-155; referring to Lechner et al 2007
- productivity, clefting device: 5.26 m3/PMH; name productivity_clefting_device; lognormal variance with pedigree 0.2506, pedigree (2,1,1,1,1)
  as m3 bulked/ productive machine hour
- ratio bulk density / solid density of chips: 2.8 dimensionless; name ratio_bulk_solid_chips; lognormal variance with pedigree 0.2506, pedigree (2,1,1,1,1)
  as m3 bulked / m3 solid
- ratio bulk density / solid density of cleft timber: 1.4 dimensionless; name ratio_bulk_solid_cleft_timber; lognormal variance with pedigree 0.2506, pedigree (2,1,1,1,1)
  as m3 bulked / m3 solid
- rotation period: 140 year; name rotation_period; lognormal variance with pedigree 0.2506, pedigree (2,1,1,1,1)
  number of years from planting to final harvest. Source: Schweinle & Thoroe (2001)
- share of chips of total wood fuel: 0.23 dimensionless; name share_chips; lognormal variance with pedigree 0.2506, pedigree (2,1,1,1,1)
  Share of chips of total wood fuel harvested (referring consistently to volume under bark or volume over bark for all types of wood fuel)share_bundles + share_chopped_wood+share_chips = 100% wood fuel; calculated based onAnonymous (2010): Statistisches Jahrbuch über Ernährung, Landwirtschaft und Forsten der Bundesrepublick Deutschland. 54. Jahrgang, Wirtschaftsverlag NW GmbH, Bremerhaven.
  Anonymous (2013): 19 Land- und Forstwirtschaft. In: Statistisches Jahrbuch 2012, Statistisches Bundesamt, Berlin, 471-500.
- share of chips processed at forest road (from above-ground biomass): 0.98 dimensionless; name share_chips_at_forest_road; lognormal variance with pedigree 0.252, pedigree (3,1,1,1,1)
  Share of chips processed at forest road of total amount of chips processed in the forest; share_chips_at _forest_road+share_chips_in_stand = 100% chips from forestry; calculated based on Anonymous (2010): Statistisches Jahrbuch über Ernährung, Landwirtschaft und Forsten der Bundesrepublick Deutschland. 54. Jahrgang, Wirtschaftsverlag NW GmbH, Bremerhaven.
  Anonymous (2013): 19 Land- und Forstwirtschaft. In: Statistisches Jahrbuch 2012, Statistisches Bundesamt, Berlin, 471-500.
- share of chips processed in stand (from above-ground biomass): 0.02 dimensionless; name share_chips_in_stand; lognormal variance with pedigree 0.252, pedigree (3,1,1,1,1)
  Share of chips processed in the stand of total amount of chips processed in the fores; share_chips_at _forest_road+share_chips_in_stand = 100% chips from forestry;calculated based on Anonymous (2010): Statistisches Jahrbuch über Ernährung, Landwirtschaft und Forsten der Bundesrepublick Deutschland. 54. Jahrgang, Wirtschaftsverlag NW GmbH, Bremerhaven.
  Anonymous (2013): 19 Land- und Forstwirtschaft. In: Statistisches Jahrbuch 2012, Statistisches Bundesamt, Berlin, 471-500.
- share of cleft timber of total wood fuel: 0.77 dimensionless; name share_cleft_timber; lognormal variance with pedigree 0.2506, pedigree (2,1,1,1,1)
  Share of cleft timber as wood fuel of total wood fuel harvested (referring consistently to volume under bark or volume over bark for all types of wood fuel); share_bundles + share_cleft_timber+share_chips = 100% wood fuel; calculated based on Anonymous (2010): Statistisches Jahrbuch über Ernährung, Landwirtschaft und Forsten der Bundesrepublick Deutschland. 54. Jahrgang, Wirtschaftsverlag NW GmbH, Bremerhaven.
  Anonymous (2013): 19 Land- und Forstwirtschaft. In: Statistisches Jahrbuch 2012, Statistisches Bundesamt, Berlin, 471-500.
- share of planted area: 1 dimensionless; name share_area_planted; lognormal variance with pedigree 0.2506, pedigree (2,1,1,1,1)
  Share of forest area that is planted instead of being restocked by natural regeneration
- share of pulpwood of total wood harvest: 0.3 dimensionless; name share_pulpwood; lognormal variance with pedigree 0.2506, pedigree (2,1,1,1,1)
  Share of pulpwood of total wood harvest (referring to volume below bark); share_sawlogs + share_pulpwood + share_wood_fuel = 100%; calculated based on Anonymous (2010): Statistisches Jahrbuch über Ernährung, Landwirtschaft und Forsten der Bundesrepublick Deutschland. 54. Jahrgang, Wirtschaftsverlag NW GmbH, Bremerhaven.
  Anonymous (2013): 19 Land- und Forstwirtschaft. In: Statistisches Jahrbuch 2012, Statistisches Bundesamt, Berlin, 471-500.
- share of sawlogs and veneer logs of total wood harvest: 0.26 dimensionless; name share_sawlogs; lognormal variance with pedigree 0.2506, pedigree (2,1,1,1,1)
  Share of sawlogs and veneer logs of total wood harvest (referring to volume below bark); share_sawlogs + share_pulpwood + share_wood_fuel = 100%; calculated based on Anonymous (2010): Statistisches Jahrbuch über Ernährung, Landwirtschaft und Forsten der Bundesrepublick Deutschland. 54. Jahrgang, Wirtschaftsverlag NW GmbH, Bremerhaven.
  Anonymous (2013): 19 Land- und Forstwirtschaft. In: Statistisches Jahrbuch 2012, Statistisches Bundesamt, Berlin, 471-500.
- share of seedlings from heated greenhouses: 0 dimensionless; name seedlings_heated
  share of seedlings from heated greenhouses of total amount of seedlings used in replanting%; Albrecht, S., S. Rüter, J. Welling, M. Knauf, U. Mantau, A. Braune, M. Baitz, H. Weimar, S. Sörgel, J. Kreissig, J. Deimling and S. Hellwig (2009): ÖkoPot - Ökologische Potenziale durch Holznutzung gezielt fördern. Abschlussbericht zum BMBF-Projekt FKZ 0330545. Universität Stuttgart, Universität Hamburg, Hamburg.
- share of wood fuel of total wood harvest: 0.44 dimensionless; name share_wood_fuel; lognormal variance with pedigree 0.2506, pedigree (2,1,1,1,1)
  Share of wood fuel of total wood harvest (referring to volume below bark); share_sawlogs + share_pulpwood + share_wood_fuel = 100%; calculated based on Anonymous (2010): Statistisches Jahrbuch über Ernährung, Landwirtschaft und Forsten der Bundesrepublick Deutschland. 54. Jahrgang, Wirtschaftsverlag NW GmbH, Bremerhaven.
  Anonymous (2013): 19 Land- und Forstwirtschaft. In: Statistisches Jahrbuch 2012, Statistisches Bundesamt, Berlin, 471-500.
- share, revenues wood production: 1 dimensionless; name share_revenues_wood; lognormal variance with pedigree 0.252, pedigree (3,1,1,1,1)
  Used to determine the share of land used for the productive function of forestry covered in this dataset
- shrinkage ratio: 0.006 dimensionless; name shrinkage_ratio; lognormal variance with pedigree 0.25, pedigree (1,1,1,1,1)
  for wood: % of volume lost per % of humidity lowered; usually applicable for humidity u < 30%; as oak according to Kollmann 1982
- skidding with skidder per m3: 0.0852 PMH/m3; name skidding; lognormal variance with pedigree 0.2506, pedigree (2,1,1,1,1)
  referring to stemwood; IMPROTANT NOTE: When considering several harvesting systems, e.g. in datasets on national forestry, this parameter is NOT the productivity of the harvesting system but the productivity of the system weighted with the share of the amount harvested by the respective system. This has to be calculated outside EcoEditor. Own calculations based on Klvac & Skoupy 2009, Skogforsk 2006, Berg & Karjalainen 2003
- sum of reference products in volume: 1 m3; name sum_RP_m3; lognormal variance with pedigree 0.005, pedigree (1,1,1,1,1)
  as solid under bark; DO NOT CHANGE; dataset might calculate misleading results
- thickness of new gravel layer: 0.02 m; name thickness_new_gravel; lognormal variance with pedigree 0.252, pedigree (3,1,1,1,1)
  thickness of layer of gravel that is added during a maintenance operation of forest roads
- wood density, basic: 541.2 kg/m3; name basic_wood_d; = dry_wood_d*(1-30*shrinkage_ratio); lognormal variance with pedigree 0.2506, pedigree (2,1,1,1,1)
  kg oven-dry matter/wet volume
- wood density, dry: 660 kg/m3; name dry_wood_d; lognormal variance with pedigree 0.25, pedigree (1,1,1,1,1)
  kg oven-dry matter/dry volume; Oenorm B3012
- yield wood over rotation period: 822 m3; name yield_wood_ub; lognormal variance with pedigree 0.2506, pedigree (2,1,1,1,1)
  yield of wood under bark per ha over one rotation period

## Reference product
- wood chips, wet, measured as dry mass: 1 kg; By-product classification allocatable product; CPC 31230: Wood in chips or particles
  production volume 6.71689e8 kg
  properties: apparent wood density 974.16 kg/m3, basic wood density 541.2, carbon allocation 0.494 kg, carbon content 0.494, carbon content, fossil 0, carbon content, non-fossil 0.494, dry mass 1 kg, dry wood density 660 kg/m3, heating value, gross 19.6 MJ, heating value, net 9.39111 MJ, price 0.107 EUR2005, water content 0.8, water in wet mass 0.8 kg, wet mass 1.8 kg

## Inputs from technosphere
- diesel, burned in building machine: 0.0230416 MJ; lognormal variance with pedigree 0.0256, pedigree (2,1,4,1,1)
  properties: UVEK_link_1 732, UVEK_relative_amount_1 1, heating value, net 1 MJ
- forwarding, forwarder: 3.3056e-5 hour; lognormal variance with pedigree 0.0256, pedigree (2,1,4,1,1)
- gravel, crushed: 0.195769 kg; lognormal variance with pedigree 0.0256, pedigree (2,1,4,1,1)
  properties: UVEK_link_1 2312, UVEK_relative_amount_1 1, dry mass 1 kg, wet mass 1 kg
- harvesting, forestry harvester: 2.59424e-5 hour; lognormal variance with pedigree 0.0256, pedigree (2,1,4,1,1)
- power sawing, without catalytic converter: 0.00075628 hour; lognormal variance with pedigree 0.0256, pedigree (2,1,4,1,1)
- skidding, skidder: 0.000138851 hour; lognormal variance with pedigree 0.0256, pedigree (2,1,4,1,1)
- tree seedling, for planting: 0.0161846 unit; lognormal variance with pedigree 0.027, pedigree (3,1,4,1,1)
  properties: carbon content, non-fossil 0.494, dry mass 0.2 kg, water content 0.5, wet mass 0.3 kg
- wood chipping, chipper, mobile, diesel, at forest road: 4.22518e-5 hour; lognormal variance with pedigree 0.0256, pedigree (2,1,4,1,1)
- wood chipping, forwarder with terrain chipper, in forest: 4.13895e-6 hour; lognormal variance with pedigree 0.0256, pedigree (2,1,4,1,1)

## Inputs from nature
- Carbon dioxide, in air [natural resource, in air]: 1.81133 kg; lognormal variance with pedigree 0.025, pedigree (1,1,4,1,1)
- Energy, gross calorific value, in biomass [natural resource, biotic]: 19.6 MJ
- Occupation, forest, intensive [natural resource, land]: 2.77113 m2*year; lognormal variance with pedigree 0.2, pedigree (1,1,4,1,1)
- Occupation, traffic area, rail/road embankment [natural resource, land]: 0.0611779 m2*year; lognormal variance with pedigree 0.2, pedigree (1,1,4,1,1)
- Transformation, from forest, intensive [natural resource, land]: 0.0197938 m2; lognormal variance with pedigree 0.35, pedigree (1,1,4,1,1)
- Transformation, from traffic area, rail/road embankment [natural resource, land]: 0.000436985 m2; lognormal variance with pedigree 0.35, pedigree (1,1,4,1,1)
- Transformation, to forest, intensive [natural resource, land]: 0.0197938 m2; lognormal variance with pedigree 0.35, pedigree (1,1,4,1,1)
- Transformation, to traffic area, rail/road embankment [natural resource, land]: 0.000436985 m2; lognormal variance with pedigree 0.35, pedigree (1,1,4,1,1)
- Wood, hard, standing [natural resource, biotic]: 0.00166297 m3; lognormal variance with pedigree 0.025, pedigree (1,1,4,1,1)

## Sampling procedure
Literature

## Extrapolations
see Geography and Technology
