# pumice quarry operation

Dataset: EcoSpold 2, unit process
Geography: RoW
Time period: 2000-01-01 to 2022-12-31
Technology level: current
Classification: ISIC rev.4 ecoinvent: 0810:Quarrying of stone, sand and clay
Classification: EcoSpold01Categories: construction materials/additives
Tags: ConvertedDataset
Scenario: Business-as-Usual
System model: Substitution, consequential, long-term
Generated by: Daniel Kellenberger (obsolete)
Published in: Kellenberger D. 2004
Database: ecoinvent
isCopyrightProtected: true
accessRestrictedTo: 1

## General comment
For a lack of data the dust emissions for bauxite mining are used as proxy. Further following proxys have been used: The amount of water has been copied from the water consumption in "sand, at mine"-wasing and for heating the "light fuel oil"-heating module has been used.
[This dataset was already contained in the ecoinvent database version 2. It was not individually updated during the transfer to ecoinvent version 3. Life Cycle Impact Assessment results may still have changed, as they are affected by changes in the supply chain, i.e. in other datasets. This dataset was generated following the ecoinvent quality guidelines for version 2. It may have been subject to central changes described in the ecoinvent version 3 change report (http://www.ecoinvent.org/database/ecoinvent-version-3/reports-of-changes/), and the results of the central updates were reviewed extensively. The changes added e.g. consistent water flows and other information throughout the database. The documentation of this dataset can be found in the ecoinvent reports of version 2, which are still available via the ecoinvent website. The change report linked above covers all central changes that were made during the conversion process.]

## Included activities end
includes excavation by digger, transportation within mine, washing, the land-use of the mine, the recultivation and dust emissions

## Geography
For the exchanges, RER, GLO and CH modules have been used as proxy.

## Technology
technology unknown

## Parameters
- fraction, process water, to air: 0.2 dimensionless; lognormal variance with pedigree 0.092025, pedigree (4,4,3,2,4)

## Reference product
- pumice: 1 kg; By-product classification allocatable product; CPC 16320: Industrial diamonds, unworked or simply sawn, cleaved or bruted; pumice stone; emery; natural corundum, natura[…]
  production volume 3.75794 kg
  properties: carbon allocation 0 kg, carbon content 0, carbon content, fossil 0, carbon content, non-fossil 0, dry mass 1 kg, price 0.06 EUR2005, water content 0, water in wet mass 0 kg, wet mass 1 kg

## Inputs from technosphere
- diesel, burned in building machine: 0.00151 MJ; lognormal variance with pedigree 0.222, pedigree (3,5,5,5,1)
  properties: heating value, net 1 MJ
- electricity, medium voltage: 1.54289e-7, 9.65628e-7, 2.13906e-7, 2.9121e-6, 5.19345e-7, 9.2662e-6, 1.46226e-6, 2.16662e-6, 6.19879e-5, 2.21027e-7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 kWh (46 suppliers, which the file names only by identifier); sum of these 0.00072 kWh; lognormal variance with pedigree 0.652, pedigree (1,1,5,5,1)
- industrial machine, heavy, unspecified: 1.67e-5 kg; lognormal variance with pedigree 0.652, pedigree (1,1,5,5,1)
- lubricating oil: 8.06e-5 kg; lognormal variance with pedigree 0.652, pedigree (1,1,5,5,1)
  properties: carbon content, fossil 0.75, dry mass 1 kg, heating value, net 40.2 MJ, wet mass 1 kg

## Inputs from nature
- Occupation, mineral extraction site [natural resource, land]: 0.0125 m2*year; lognormal variance with pedigree 0.142, pedigree (3,5,5,5,1)
- Pumice [natural resource, in ground]: 2.17 kg; lognormal variance with pedigree 0.102, pedigree (3,5,5,5,1)
- Transformation, from unspecified [natural resource, land]: 0.00025 m2; lognormal variance with pedigree 0.652, pedigree (1,1,5,5,1)
- Transformation, to mineral extraction site [natural resource, land]: 0.00025 m2; lognormal variance with pedigree 0.14, pedigree (4,1,5,5,1)
- Water, well, in ground [natural resource, in water]: 0.00299 m3; lognormal variance with pedigree 0.652, pedigree (1,1,5,5,1)

## Emissions to nature
- Particulate Matter, < 2.5 um [air, non-urban air or from high stacks]: 8e-6 kg; lognormal variance with pedigree 0.652, pedigree (1,1,5,5,1)
- Particulate Matter, > 10 um [air, non-urban air or from high stacks]: 0.000112 kg; lognormal variance with pedigree 0.652, pedigree (1,1,5,5,1)
- Particulate Matter, > 2.5 um and < 10um [air, non-urban air or from high stacks]: 4e-5 kg; lognormal variance with pedigree 0.652, pedigree (1,1,5,5,1)
- Water [air, unspecified]: 0.000598 m3; lognormal variance with pedigree 0.0427, pedigree (2,2,5,5,1)
- Water [water, unspecified]: 0.002392 m3; lognormal variance with pedigree 0.0427, pedigree (2,2,5,5,1)

## Sampling procedure
sampled from different other modules (some data copied from "limestone crushing", some from "bentonite mining", some from "recultivation, limestone mine", etc.).

## Extrapolations
data which are only available for GLO, RER and CH have been used as proxy for D This dataset has been copied from an original dataset covering the geography DE. The uncertainty has been adjusted accordingly.

## Review by Roberto Dones 2005-07-19
passed
