# heat production, untreated waste wood, at furnace 1000-5000 kW, state-of-the-art 2014

Dataset: EcoSpold 2, unit process
Geography: RoW
Time period: 2014-01-01 to 2022-12-31
Technology level: modern
Classification: ISIC rev.4 ecoinvent: 3530:Steam and air conditioning supply
Classification: EcoSpold01Categories: wood energy/heating systems
Synonyms: automatic wood heating system
Scenario: Business-as-Usual
System model: Substitution, consequential, long-term
Share of production covered: 0.1 %
Generated by: Christian Bauer
Database: ecoinvent
isCopyrightProtected: true
accessRestrictedTo: 1

## General comment
This activity represents the combustion of untreated waste wood chips (eqivalent to natural wood chips from forest) in Switzerland in new (=installed in 2014) boilers suited for waste wood combustion and is used for the global activity as first approximation with uncertainty factors adjusted accordingly. Equipped with an industrial electrostatic precipitator in order to comply with PM emission regulation. LHV of waste wood: 13.99 MJ/kg. Air emission factors as well as the boiler efficiency represent average annual operation including start and stop (warm-up and shut-down). Therefore, emission data will be higher and efficiency will be lower than rated values provided by manufacturers. The inventory shall be considered as being representative for boilers with nominal capacities above 1 MW.

## Included activities start
from delivery of waste wood

## Included activities end
This activity describes the combustion of untreated waste wood chips, corresponding to natural wood from forest. Included are the infrastructure, the wood requirements (LHV=13.99 MJ/kg), the emissions to air, the electricity needed for operation, and the disposal of the ashes.

## Geography
LCI data for Switzerland were used for the GLO activityy as first approximation with uncertainty factors adjusted accordingly.

## Technology
Modern boiler technology available on the Swiss market, installed in 2014.

## Time period
Key emission factors PM, CO, NMVOC, NOx, CH4 as well as the average annual efficiency have been updated using the latest available information. Other emission data are from the second half of the 1990´s.

## Parameters
- scaling factor: 1.25 dimensionless; name scaling_factor; = 1/0.8; lognormal variance with pedigree 0.012, pedigree (2,3,1,5,3)
  The scaling factor corresponds to the inverse of the average annual efficiency of the heating system, including start/stop (warm up and cool down). Therefore, this efficiency will be lower than figures provided by manufacturers. The estimated value was provided by T.Nussbaumer, Verenum, and represents newly (=in 2014) installed boiler in this size category in Switzerland.

## Reference product
- waste wood, untreated: -1 kg; By-product classification Waste; CPC 3928: Sawdust and wood waste and scrap
  production volume 7.74124e7 kg
  properties: carbon allocation 0.389056 kg, carbon content 0.48632, carbon content, fossil 0, carbon content, non-fossil 0.48632, dry mass 0.8 kg, heating value, net 13.99 MJ, price 0 EUR2005, water content 0.25, water in wet mass 0.2 kg, wet mass 1 kg

## Inputs from technosphere
- dust collector, electrostatic precipitator, for industrial use: 4.85764e-8 unit; lognormal variance with pedigree 0.011, pedigree (2,2,5,5,2)
- electricity, low voltage: 0.00279149, 0.00101479, 0.000207546, 0.00082563, 0.00595236, 0.00554157, 0.049689, 0.00690049 kWh (8 suppliers, which the file names only by identifier); sum of these 0.0729229 kWh; lognormal variance with pedigree 0.011, pedigree (2,2,5,5,2)
- furnace, wood chips, with silo, 1000kW: 4.85764e-8 unit; lognormal variance with pedigree 0.11, pedigree (3,4,5,2,2)
- heat, district or industrial, other than natural gas: -0.0202476, -2.37437, -11.5954 MJ (3 suppliers, which the file names only by identifier); sum of these -13.99 MJ
  properties: corresponding fuel use, propane, furnace >100kW 1.05263 MJ, heating value, net 1 MJ, price 0.0106 EUR2005
- wood ash mixture, pure: -0.00590956, -0.00283419 kg (2 suppliers, which the file names only by identifier); sum of these -0.00874375 kg; lognormal variance with pedigree 0.011, pedigree (2,2,4,5,2)
  properties: carbon content, non-fossil 0.012, dry mass 1 kg, wet mass 1 kg

## Emissions to nature
- Acetaldehyde [air, urban air close to ground]: 1.06674e-6 kg; lognormal variance with pedigree 0.011, pedigree (2,2,5,5,2)
- Ammonia [air, urban air close to ground]: 3.02534e-5 kg; lognormal variance with pedigree 0.011, pedigree (2,2,5,5,2)
- Arsenic ion [air, urban air close to ground]: 1.74875e-8 kg; lognormal variance with pedigree 0.011, pedigree (2,2,5,5,2)
- Benzene [air, urban air close to ground]: 1.59136e-5 kg; lognormal variance with pedigree 0.011, pedigree (2,2,5,5,2)
- Benzene, ethyl- [air, urban air close to ground]: 5.24625e-7 kg; lognormal variance with pedigree 0.011, pedigree (2,2,5,5,2)
- Benzene, hexachloro- [air, urban air close to ground]: 1.2591e-13 kg; lognormal variance with pedigree 0.011, pedigree (2,2,5,5,2)
- Benzo(a)pyrene [air, urban air close to ground]: 8.74375e-9 kg; lognormal variance with pedigree 0.011, pedigree (2,2,5,5,2)
- Bromine [air, urban air close to ground]: 1.04925e-6 kg; lognormal variance with pedigree 0.011, pedigree (2,2,5,5,2)
- Cadmium II [air, urban air close to ground]: 1.22413e-8 kg; lognormal variance with pedigree 0.011, pedigree (2,2,5,5,2)
- Calcium [air, urban air close to ground]: 0.000102302 kg; lognormal variance with pedigree 0.011, pedigree (2,2,5,5,2)
- Carbon dioxide, non-fossil [air, urban air close to ground]: 13.1156 kg; lognormal variance with pedigree 0.011, pedigree (2,2,5,5,2)
- Carbon monoxide, non-fossil [air, urban air close to ground]: 0.00174875 kg; lognormal variance with pedigree 0.0033, pedigree (2,2,4,5,2)
- Chlorine [air, urban air close to ground]: 3.14775e-6 kg; lognormal variance with pedigree 0.011, pedigree (2,2,5,5,2)
- Chromium III [air, urban air close to ground]: 6.92505e-8 kg; lognormal variance with pedigree 0.011, pedigree (2,2,5,5,2)
- Chromium VI [air, urban air close to ground]: 6.995e-10 kg; lognormal variance with pedigree 0.011, pedigree (2,2,5,5,2)
- Copper ion [air, urban air close to ground]: 3.84725e-7 kg; lognormal variance with pedigree 0.011, pedigree (2,2,5,5,2)
- Dinitrogen monoxide [air, urban air close to ground]: 4.02213e-5 kg; lognormal variance with pedigree 0.011, pedigree (2,2,5,5,2)
- Dioxins, measured as 2,3,7,8-tetrachlorodibenzo-p-dioxin [air, urban air close to ground]: 5.42113e-13 kg; lognormal variance with pedigree 0.011, pedigree (2,2,5,5,2)
- Fluorine [air, urban air close to ground]: 8.74375e-7 kg; lognormal variance with pedigree 0.011, pedigree (2,2,5,5,2)
- Formaldehyde [air, urban air close to ground]: 2.27338e-6 kg; lognormal variance with pedigree 0.011, pedigree (2,2,5,5,2)
- Hydrocarbons, aliphatic, alkanes, unspecified [air, urban air close to ground]: 1.59136e-5 kg; lognormal variance with pedigree 0.011, pedigree (2,2,5,5,2)
- Hydrocarbons, aliphatic, unsaturated [air, urban air close to ground]: 5.42113e-5 kg; lognormal variance with pedigree 0.011, pedigree (2,2,5,5,2)
- Lead II [air, urban air close to ground]: 4.37188e-7 kg; lognormal variance with pedigree 0.011, pedigree (2,2,5,5,2)
- Magnesium [air, urban air close to ground]: 6.2955e-6 kg; lognormal variance with pedigree 0.011, pedigree (2,2,5,5,2)
- Manganese II [air, urban air close to ground]: 2.97288e-6 kg; lognormal variance with pedigree 0.011, pedigree (2,2,5,5,2)
- Mercury II [air, urban air close to ground]: 5.24625e-9 kg; lognormal variance with pedigree 0.011, pedigree (2,2,5,5,2)
- Methane, non-fossil [air, urban air close to ground]: 4.197e-5 kg; lognormal variance with pedigree 0.0033, pedigree (2,2,4,5,2)
- NMVOC, non-methane volatile organic compounds [air, urban air close to ground]: 9.793e-5 kg; lognormal variance with pedigree 0.0033, pedigree (2,2,4,5,2)
- Nickel II [air, urban air close to ground]: 1.04925e-7 kg; lognormal variance with pedigree 0.011, pedigree (2,2,5,5,2)
- Nitrogen oxides [air, urban air close to ground]: 0.00332263 kg; lognormal variance with pedigree 0.0033, pedigree (2,2,4,5,2)
- PAH, polycyclic aromatic hydrocarbons [air, urban air close to ground]: 1.94111e-7 kg; lognormal variance with pedigree 0.011, pedigree (2,2,5,5,2)
- Particulate Matter, < 2.5 um [air, urban air close to ground]: 8.74375e-5 kg; lognormal variance with pedigree 0.0033, pedigree (2,2,4,5,2)
- Phenol, pentachloro- [air, urban air close to ground]: 1.41649e-10 kg; lognormal variance with pedigree 0.011, pedigree (2,2,5,5,2)
- Phosphorus [air, urban air close to ground]: 5.24625e-6 kg; lognormal variance with pedigree 0.011, pedigree (2,2,5,5,2)
- Potassium I [air, urban air close to ground]: 0.000409208 kg; lognormal variance with pedigree 0.011, pedigree (2,2,5,5,2)
- Sodium [air, urban air close to ground]: 2.27338e-5 kg; lognormal variance with pedigree 0.011, pedigree (2,2,5,5,2)
- Sulfur dioxide [air, urban air close to ground]: 4.37188e-5 kg; lognormal variance with pedigree 0.011, pedigree (2,2,5,5,2)
- Toluene [air, urban air close to ground]: 5.24625e-6 kg; lognormal variance with pedigree 0.011, pedigree (2,2,5,5,2)
- Water [air, urban air close to ground]: 0.000200057 m3; lognormal variance with pedigree 0.0083, pedigree (2,2,4,5,2)
- Zinc II [air, urban air close to ground]: 5.24625e-6 kg; lognormal variance with pedigree 0.011, pedigree (2,2,5,5,2)
- m-Xylene [air, urban air close to ground]: 2.0985e-6 kg; lognormal variance with pedigree 0.011, pedigree (2,2,5,5,2)

## Sampling procedure
literature

## Extrapolations
This dataset has been copied from an original dataset covering the geography CH. The uncertainty has been adjusted accordingly.
