# magnesium oxide production

Dataset: EcoSpold 2, unit process
Geography: RoW
Time period: 2000-01-01 to 2022-12-31
Technology level: current
Classification: ISIC rev.4 ecoinvent: 0729:Mining of other non-ferrous metal ores
Synonyms: Magnesia; Periclase; Oxomagnesium; 1309-48-4
Scenario: Business-as-Usual
System model: Substitution, consequential, long-term
Generated by: Roland Hischier
Published in: Hischier R. 2007
Database: ecoinvent
isCopyrightProtected: true
accessRestrictedTo: 1

## General comment
This dataset represents the production of 1 kg of magnesium oxide. Magnesium oxide forms colourless, green or brown crystals. Industrially used magnesium oxide consists mainly of sintered (sintered magnesia) for use as refractory material in the steel industry. Other forms of magnesium oxide that are used include calcinated material (caustic magnesia), which is used for agriculture, as well as the pulp and paper and the building industry, and fused magnesia.
Magnesium oxide is produced from natural magnesite (MgCO3), from dolomite (CaCO3 and MgCO3), from seawater or from brines. This dataset represents the production of caustic magnesium obtained by mining magnesite in an open-pit mine. This is followed by a benefication step, which comprises crushing and gravity separation. Finally the material is fed into a feeder to end up with caustic magnesium oxide. The inventory in this dataset is based on extrapolations based on similar processes.
References:
Hischier R. (2007) Life Cycle Inventories of Packagings & Graphical Papers. ecoinvent report No. 11. Swiss Centre for Life Cycle Inventories, Dübendorf, 2007.
Updated Values for energy, water and CO2-emissions from:
- Schorcht, F., Kourti, I., Scalet, B.M., Roudier, S. and Sancho, L.D., 2013. Best available techniques (BAT) reference document for the production of cement, lime and magnesium oxide. European Commission Joint Research Centre Institute for Prospective Technological Studies, Luxembourg.

## Included activities start
The activity starts with the extraction of the raw materials.

## Included activities end
This activity ends with the production of magnesium oxide. The dataset includes the processing of raw materials, the use of machinery and infrastructure, the energy consumption and estimated emissions to air.

## Geography
Data are used here as global average.

## Technology
Caustic magnesium oxide is obtained by burning MgCO3 or Mg(OH)2 (brucite) slightly above the decomposition temperature. In both cases, first there is a mining and crushing step and then there is a calcination step with a temperature of about 800 - 1000 °C, for which rotary kilns or hearth furncaces techniques are used.
Due to missing production data and no quantitative information in Seeger et al. (2000), process data from similar processes within the ecoinvent project are used as a first approximation for the caustic magnesium oxide production:
- Mining: the data for the mining operation are taken from iron mining (Classen et al. 2007). As resource “magnesite, in ground” with a yield of 90% (assumption due to lack of respective information) is used while all other inputs and outputs are taken 1:1 from iron mining. Due to a lack of data, a magnesite content in the crude ore of 60% is assumed here.
- Crushing: The data from limestone crushing are used as a first approximation. Therefore, the data are taken from the dataset “primary crushing of limestone” in Kellenberger et al. (2007).
- Benefication: No process specific information are available - therefore the input and output data from the iron benefication process of the ecoinvent project (shown in Classen et al. 2007) are used as a first approximation. This process has a yield of 85% - a value that, due to a lack of more specific data for magnesium oxide, is used here as well.
- Caustic magnesium oxide production: The data from lime calcination are used as a first approximation due to the fact that this process uses also a kiln. This process has a yield of 58% - a value that, due to a lack of more specific data, is used here as well.
References:
Classen M., Althaus H.-J., Blaser S., Doka G., Jungbluth N. and Tuchschmid M. (2007) Life Cycle Inventories of Metals. Final report ecoinvent data v2.0 No.10. EMPA Dübendorf, Swiss Centre for Life Cycle Inventories, Dübendorf, CH, Online-Version under: www.ecoinvent.ch.
Kellenberger D., Althaus H.-J., Jungbluth N. and Künniger T. (2007) Life Cycle Inventories of Building Products. Final report ecoinvent data v2.0 No. 7. Swiss Centre for Life Cycle Inventories, Empa - TSL, Dübendorf, CH, Online-Version under: www.ecoinvent.ch.
Seeger M., Otto W., Flick W., Bickelhaupt F. and Akkerman O. S. (2000) Magnesium Compounds. In: Ullmann's Encyclopedia of Industrial Chemistry, Sixth Edition, June-2001 Electronic Release (ed. Häussinger P., Leitgeb P. and Schmücker B.), 6 th Electronic Release Edition. Wiley InterScience, New York, Online-Version under: http://www.mrw.interscience.wiley.com/ueic/ull_search_fs.html.

## Parameters
- fraction, process water, to air: 0.205 dimensionless; name fraction_PW_to_air; lognormal variance with pedigree 0.092025, pedigree (4,4,3,2,4)
  Literature value (Statistics Canada, 2007 & Shaffer, K.H., 2008, Consumptive water use in the Great Lakes Basin, USGS) (Vionnet, S., Quantis Water Database - Technical Report, 2012).

## Reference product
- magnesium oxide: 1 kg; By-product classification allocatable product; CPC 14290: Other non-ferrous metal ores and concentrates (other than uranium or thorium ores and concentrates)
  production volume 9.23633e9 kg
  properties: carbon allocation 0 kg, carbon content 0, carbon content, fossil 0, carbon content, non-fossil 0, dry mass 1 kg, magnesium content 0.6031, oxygen content 0.397, price 0.22 EUR2005, water content 0, water in wet mass 0 kg, wet mass 1 kg

## Inputs from technosphere
- blasting: 0.000553 kg; lognormal variance with pedigree 0.2306, pedigree (4,3,5,5,5)
- conveyor belt: 5.68e-8 m; lognormal variance with pedigree 0.5406, pedigree (4,3,5,5,5)
- diesel, burned in building machine: 0.0521 MJ; lognormal variance with pedigree 0.2306, pedigree (4,3,5,5,5)
  properties: heating value, net 1 MJ
- electricity, medium voltage: 0.0121505, 0.000454614, 0.00577602, 0.10025, 0.00841775, 0.000451186 kWh (6 suppliers, which the file names only by identifier); sum of these 0.1275 kWh; lognormal variance with pedigree 0.1016, pedigree (2,2,5,3,2)
- heat, central or small-scale, natural gas: 4.77 MJ; lognormal variance with pedigree 0.1016, pedigree (2,2,5,3,2)
  properties: heating value, net 1 MJ
- heat, district or industrial, other than natural gas: 0.00737346, 4.22263 MJ (2 suppliers, which the file names only by identifier); sum of these 4.23 MJ; lognormal variance with pedigree 0.1016, pedigree (2,2,5,3,2)
  properties: heating value, net 1 MJ
- industrial machine, heavy, unspecified: 0.000411 kg; lognormal variance with pedigree 0.5406, pedigree (4,3,5,5,5)
- mine infrastructure, iron: 1.7e-12 unit; lognormal variance with pedigree 0.5406, pedigree (4,3,5,5,5)
- recultivation, iron mine: 4.35e-6 m2; lognormal variance with pedigree 0.5406, pedigree (4,3,5,5,5)

## Inputs from nature
- Magnesite [natural resource, in ground]: 2.27 kg; lognormal variance with pedigree 0.2306, pedigree (4,3,5,5,5)
- Occupation, mineral extraction site [natural resource, land]: 0.000245 m2*year; lognormal variance with pedigree 0.2706, pedigree (4,3,5,5,5)
- Transformation, from forest, unspecified [natural resource, land]: 4.35e-6 m2; lognormal variance with pedigree 0.3606, pedigree (4,3,5,5,5)
- Transformation, to mineral extraction site [natural resource, land]: 4.35e-6 m2; lognormal variance with pedigree 0.3606, pedigree (4,3,5,5,5)
- Water, unspecified natural origin [natural resource, in water]: 0.00831 m3; lognormal variance with pedigree 0.2306, pedigree (4,3,5,5,5)
- Water, well, in ground [natural resource, in water]: 0.000189 m3; lognormal variance with pedigree 0.1016, pedigree (2,2,5,3,2)

## Emissions to nature
- Carbon dioxide, fossil [air, urban air close to ground]: 1.092 kg; lognormal variance with pedigree 0.1016, pedigree (2,2,5,3,2)
- Carbon monoxide, fossil [air, urban air close to ground]: 0.00477 kg; lognormal variance with pedigree 0.7806, pedigree (4,3,5,5,5)
- NMVOC, non-methane volatile organic compounds [air, urban air close to ground]: 4.55e-5 kg; lognormal variance with pedigree 0.2706, pedigree (4,3,5,5,5)
- Nitrogen oxides [air, urban air close to ground]: 0.000336 kg; lognormal variance with pedigree 0.2706, pedigree (4,3,5,5,5)
- Particulate Matter, < 2.5 um [air, urban air close to ground]: 0.000309 kg; lognormal variance with pedigree 0.5406, pedigree (4,3,5,5,5)
- Particulate Matter, > 10 um [air, urban air close to ground]: 0.00298 kg; lognormal variance with pedigree 0.2706, pedigree (4,3,5,5,5)
- Particulate Matter, > 2.5 um and < 10um [air, urban air close to ground]: 0.0027 kg; lognormal variance with pedigree 0.3606, pedigree (4,3,5,5,5)
- Sulfur dioxide [air, urban air close to ground]: 0.000336 kg; lognormal variance with pedigree 0.2306, pedigree (4,3,5,5,5)
- Water [air, unspecified]: 0.0017423 m3; lognormal variance with pedigree 0.0427, pedigree (2,2,5,5,1)
- Arsenic ion [water, surface water]: 1.85e-5 kg; lognormal variance with pedigree 0.7806, pedigree (4,3,5,5,5)
- BOD5, Biological Oxygen Demand [water, unspecified]: 0.00534901 kg; lognormal variance with pedigree 0.218, pedigree (4,5,5,5,5)
- COD, Chemical Oxygen Demand [water, unspecified]: 0.00534901 kg; lognormal variance with pedigree 0.218, pedigree (4,5,5,5,5)
- Cadmium II [water, surface water]: 1.85e-5 kg; lognormal variance with pedigree 0.7806, pedigree (4,3,5,5,5)
- Chromium VI [water, surface water]: 1.85e-5 kg; lognormal variance with pedigree 0.7806, pedigree (4,3,5,5,5)
- Copper ion [water, surface water]: 9.24e-5 kg; lognormal variance with pedigree 0.7806, pedigree (4,3,5,5,5)
- Cyanide [water, surface water]: 0.000185 kg; lognormal variance with pedigree 0.2706, pedigree (4,3,5,5,5)
- DOC, Dissolved Organic Carbon [water, unspecified]: 0.00150001 kg; lognormal variance with pedigree 0.218, pedigree (4,5,5,5,5)
- Iron ion [water, surface water]: 0.000647 kg; lognormal variance with pedigree 0.7806, pedigree (4,3,5,5,5)
- Lead II [water, surface water]: 3.7e-5 kg; lognormal variance with pedigree 0.7806, pedigree (4,3,5,5,5)
- Mercury II [water, surface water]: 1.85e-6 kg; lognormal variance with pedigree 0.7806, pedigree (4,3,5,5,5)
- Nickel II [water, surface water]: 9.24e-5 kg; lognormal variance with pedigree 0.7806, pedigree (4,3,5,5,5)
- Oils, unspecified [water, surface water]: 0.00185 kg; lognormal variance with pedigree 0.5406, pedigree (4,3,5,5,5)
- TOC, Total Organic Carbon [water, unspecified]: 0.00150001 kg; lognormal variance with pedigree 0.218, pedigree (4,5,5,5,5)
- Water [water, unspecified]: 0.00675671 m3; lognormal variance with pedigree 0.0427, pedigree (2,2,5,5,1)
- Zinc II [water, surface water]: 0.00037 kg; lognormal variance with pedigree 0.7806, pedigree (4,3,5,5,5)

## Sampling procedure
The data is approximated based on similar processes.

## Extrapolations
Data approximated with data from iron mining and benefication as well as lime crushing and milling. This dataset has been copied from an original dataset covering the geography RER. The uncertainty has been adjusted accordingly.

## Review by Emilia Moreno Ruiz 2017-08-10
This dataset was additionally reviewed in a separate review process by Eric Johnson of Atlantic Consulting as well as Emilia Moreno Ruiz and Gregor Wernet of ecoinvent.
