# nutrient supply from phosphate rock, beneficiated

Dataset: EcoSpold 2, unit process
Geography: RoW
Time period: 2016-01-01 to 2022-12-31
Technology level: current
Classification: ISIC rev.4 ecoinvent: 0161:Support activities for crop production
Scenario: Business-as-Usual
System model: Substitution, consequential, long-term
Generated by: Avraam Symeonidis
Database: ecoinvent
isCopyrightProtected: true
accessRestrictedTo: 1

## General comment
This inventory describes the supply of nutrients from ''phosphate rock, beneficiated'' for fertiliser use.
No machinery expenditures or emissions to the environment are considered related to the actual application of this substance on soil during its agricultural use. The purpose of this activity is to connect the chemical production of ''phosphate rock, beneficiated'' with its generic use as fertilizer. The product ''phosphate rock, beneficiated'' is connected to the generic market for ''inorganic phosphorus fertiliser, as P2O5'' through this supplying activity. In the agricultural context, ''phosphate rock, beneficiated'' can be used directly as a fertilizer input to crop production, eventually with other chemicals; alternatively, a generic input of ''inorganic phosphorus fertiliser, as P2O5'' can be used instead, and this will represent the regional consumption mix for his type of nutrient. A way in between is allowed by using the generic input ''inorganic phosphorus fertiliser, as P2O5'' and link to the activity providing it from a specific chemical.
In all cases, emissions associated to the application of the fertilizer have to be calculated in the crop production activity.

## Technology
Inventory based on composition of ''phosphate rock, beneficiated''.

## Reference product
- inorganic phosphorus fertiliser, as P2O5: 1 kg; By-product classification allocatable product; CPC 3462: Mineral or chemical fertilizers, phosphatic
  production volume 4.39905e10 kg
  properties: carbon allocation 0 kg, carbon content 0, carbon content, fossil 0, carbon content, non-fossil 0, dry mass 1 kg, oxygen content 0.563579, phosphorus content 0.436421, price 0.241 EUR2005, water content 0, water in wet mass 0 kg, wet mass 1 kg

## Inputs from technosphere
- phosphate rock, beneficiated: 3.04417, 0.0404139, 0.0404139 kg (3 suppliers, which the file names only by identifier); sum of these 3.125 kg; lognormal variance with pedigree 0.17, pedigree (3,5,2,1,4)
  properties: dry mass 1 kg, oxygen content 0.180345, phosphorus content 0.139655, wet mass 1 kg
