# electricity production, natural gas, conventional power plant

Dataset: EcoSpold 2, unit process
Geography: BR-North-eastern grid
Time period: 2014-01-01 to 2022-12-31
Technology level: current
Classification: EcoSpold01Categories: natural gas/power plants
Classification: ISIC rev.4 ecoinvent: 3510:Electric power generation, transmission and distribution
Tags: fossil fuels; natural gas power
Scenario: Business-as-Usual
System model: Substitution, consequential, long-term
Generated by: Henrique Rogerio Antunes de Souza Junior
Published in: Faist Emmenegger, M. 2007
Database: ecoinvent
isCopyrightProtected: true
accessRestrictedTo: 1

## General comment
This dataset represents the production of high voltage electricity in a conventional steam boiler natural gas power plant Brazil-North-eastern in 2014.
Comments on the inventory:
Information about electricity production was obtained in Capacidade Instalada de Geração Elétrica Brasil e Mundo (2014): Ano Referência 2014 and Matrizes Elétricas Estaduais: Ano Referência 2015.
Information about emissions was obtained in COELHO, S. O. (2014).
MME (2015). Capacidade Instalada de Geração Elétrica Brasil e Mundo (2014): Ano Referência 2014. Edição de 05 de março de 2015. Ministério De Minas E Energia – MME. Secretaria De Planejamento E Desenvolvimento Energético. Núcleo De Estudos Estratégicos De Energia.
MME (2016). Matrizes Elétricas Estaduais: Ano Referência 2015. Edição de 23 de novembro de 2016. Ministério De Minas E Energia – MME. Secretaria De Planejamento E Desenvolvimento Energético. Núcleo De Estudos Estratégicos De Energia.
COELHO, S. O. (2014). Avaliação das Emissões Atmosféricas das Principais Termelétricas Brasileiras a Gás Natural – Ano Base 2013. Trabalho Final de Curso apresentado ao Colegiado do Curso de Engenharia Sanitária e Ambiental da Universidade Federal de Juiz de Fora, como requisito parcial à obtenção do título de Engenheiro Sanitarista e Ambiental. UNIVERSIDADE FEDERAL DE JUIZ DE FORA – UFJF. 2014.
The original ecoinvent dataset used as a basis was 'electricity production, natural gas, conventional power plant, BR, 1990 - 2015' and it has been copied in '12/2017'
[This dataset is meant to replace the following datasets:
- electricity production, natural gas, conventional power plant, BR, 1990 - 2015]

## Included activities start
From the constructed natural gas power plant ready to produce electricity.

From reception of natural gas and operating materials at power plant/factory gate

## Included activities end
This activity ends with 1kWh of high voltage electricity produced at the power plant and arrived at the busbar.

This dataset includes:
- all operation and maintenance activities and materials of the power plants.
- Cooling: It is a assumed that all plants use wet cooling with a cooling tower.No cooling tower is included in this dataset (will be implemented in future versions)
- decarbonised water use for reduction of NOx emissions

This dataset doesn't include
- raw materials extraction, decommissioning and waste treatment as these activities are already included in the infrastructure datasets.
- transformation of the electricity produced.

## Time period
The Annual Production Volume is valid for the year 2014.

## Parameters
- efficiency: 0.409 dimensionless; lognormal variance with pedigree 0.017225, pedigree (4,3,1,2,3)
  Literature value/calculated value/estimation. Net electrical efficiency based on the lower heating value (LHV). For all OECD countries, the IEA Electricity information 2014 provides data for the year 2012 on natural gas fuel input (TJ, Net calorific value NCV) and gross electricity production (GWh) as well as heat production (TJ) in tables 8 and 9 for each country for electricity only and Combined Heat and Power (CHP) plants each.
  For all non-OECD countries, data from the IEA electricity information 2014, tables 1.3 (electricity production) and table 1.5 (fuel input) have been used. In cases where only total values for electricity production in electricity only/CHP plants were given, the total value was applied to both types.
  Together with the information on own use (see parameter 'losses'), the net electrical efficiency based on the NCV in natural gas electricity only and CHP plants is calculated. Based on the estimated shares of the four natural gas types (see general comment) and assumed average and maximum values for efficiency in each of these types, the resulting estimated electrical efficiency per country and type was calculated.
  Estimated average and maximum efficiencies for the four power plant types (based on expert judgment and literature values):
  - conventional power plant, w/o CHP: 0.33 / 0.45
  - conventional power plant, with CHP: 0.28 / 0.38
  - combined cycle power plant, w/o CHP: 0.53 / 0.6
  - combined cycle power plant, with CHP: 0.37 / 0.5
  IEA. 2014. Electricity Information 2014. ISBN 978-92-64-21692-1. International Energy Agency (IEA), Paris Cedex (FR).
  IEA/OECD. 2014. Energy balances of non-OECD countries 2014. International Energy Agency (IEA), Paris Cedex (FR).
  output relative to input (requires additional specification)
- factor: input of MJ for the production of 1 kWh: 8.80196 MJ/kWh; name factor_MJ_kWh; = 1*3.6/efficiency; lognormal variance with pedigree 0.0532, pedigree (4,4,3,4,4)
  Calculated value. 3.6 MJ = 1kWh.
  nan
- fraction, cooling water, to air: 0.0159178 dimensionless; name fraction_CW_to_air; = (WConsumption_EP_NG_recirculatingCS*recirculating_CS_fraction_from_allCS+WConsumption_EP_NG_onceT_andCP_CS*once_through_andCP_CS_fractio_from_allCS)/(WWithdrawal_EP_NG_recirculating_CS*recirculating_CS_fraction_from_allCS+WWithdrawal_EP_NG_onceT_andCP_CS*once_through_andCP_CS_fractio_from_allCS); lognormal variance with pedigree 0.092025, pedigree (4,4,3,2,4)
  Calculated
  nan
- fraction, process water, to air: 0.15 dimensionless; name fraction_PW_to_air; lognormal variance with pedigree 0.092025, pedigree (4,4,3,2,4)
  Literature value. In case when no industry/process specific data are available, default evaporation fraction value is used. This value is 15% and is based on literature (Statistics Canada, 2007 & Shaffer, K.H., 2008, Consumptive water use in the Great Lakes Basin, USGS & Shiklomanov, 2003, World Water Resources at the Beginning of the 21st Century) and has been approved by an expert.
  nan
- fraction, water, completely softened, to air: 0.15 dimensionless; name fraction_WCS_to_air; = fraction_PW_to_air; lognormal variance with pedigree 0.092025, pedigree (4,4,3,2,4)
  Calculated value. See comment in the other parametres present in this dataset. Water, completely softened is considered to be always used as process water, thus process water fractions to air are applied to all water, completely softened input flows to calculate the amount of water consumed in the processes.
  nan
- fraction, water, decarbonised, to air: 0.0159178 dimensionless; name fraction_WDC_to_air; = fraction_CW_to_air; lognormal variance with pedigree 0.092025, pedigree (4,4,3,2,4)
  Calculated value. See comments in the other parametres present in this dataset. Decarbonised water is considered to be always used as cooling water, thus cooling water fractions to air are applied to all carbonised water input flows to calculate the amount of water consumed in the processes.
  nan
- gross electricity production: 9.21517e9 kWh; name gross_electricity; = (93816000000*0.18)*(0.51)*(1+losses_gross_net); lognormal variance with pedigree 0.0019, pedigree (2,2,1,1,2)
  Literature value/statistics.
  The data are find in Matrizes Elétricas Estaduais: Ano Referência 2015 (page 5 - North-eastern).
  The gross electricity production are calculated by net production plus generation losses (losses from gross electricity production).
  equation: annual production * natural gas fraction * conventional proportion * efficiency
  conventional proportion = 51%
  according Coelho (2014), this is the proportion of North-eastern electricity production by conventional power plants: TERMOCABO-PE*; U.CAMACARI-BA*; ROMULO ALMEIDA-BA*; CELSO FURTADO-BA*; MARANHÃO IV-MA*; MARANHÃO V-MA* (pages 65-88)
  COELHO, S. O. (2014). Avaliação das Emissões Atmosféricas das Principais Termelétricas Brasileiras a Gás Natural - Ano Base 2013. Trabalho Final de Curso apresentado ao Colegiado do Curso de Engenharia Sanitária e Ambiental da Universidade Federal de Juiz de Fora, como requisito parcial à obtenção do título de Engenheiro Sanitarista e Ambiental. UNIVERSIDADE FEDERAL DE JUIZ DE FORA - UFJF. 2014.
  MME (2016). Matrizes Elétricas Estaduais: Ano Referência 2015. Edição de 23 de novembro de 2016. Ministério De Minas E Energia - MME. Secretaria De Planejamento E Desenvolvimento Energético. Núcleo De Estudos Estratégicos De Energia. Available in: <http://www.mme.gov.br/documents/10584/3580498/03+-+Matrizes+El%C3%A9tricas+Estaduais+2016+-+ano+ref.+2015+%28PDF%29/ddfaad8c-a436-4aa8-b619-f95dd2cf689c?version=1.0> Access in: 12/2017.
- losses from gross electricity production: 0.07 dimensionless; name losses_gross_net; lognormal variance with pedigree 0.017225, pedigree (4,3,1,2,3)
  Calculated value. Own use of electricity plants in this country in 2012. For the non-OECD countries, the losses were first calculated for the total electricity sector based on the IEA electricity information 2014, table 1.1 (net electricity = gross electricity minus own use). However, this value can be very low if the share of electricity from fossiles is low in a specific country. Therefore, the default loss as described by the IEA in the electricity statistic is applied, which is 0.07 (IEA electricity information 2014: The difference between gross and net electricity production is generally observed to be about 7% for conventional thermal stations, 1% for hydro stations and 6% for nuclear.)
  IEA. 2014. Electricity Information 2014. ISBN 978-92-64-21692-1. International Energy Agency (IEA), Paris Cedex (FR).
  nan
- once-through and cooling pond cooling systems as a fraction of all cooling syste: 0.625 dimensionless; name once_through_andCP_CS_fractio_from_allCS; lognormal variance with pedigree 0.092025, pedigree (4,4,3,2,4)
  Calculated as an average of data available for Europe (Floerke, 2008, Future changes of freshwater needs in the electricity production sector) and USA (NERL, 2011, Estimating freshwater needs to meet future thermoelectric generation requirements).
  nan
- recirculating cooling system as a fraction of all cooling systems: 0.375 dimensionless; name recirculating_CS_fraction_from_allCS; lognormal variance with pedigree 0.092025, pedigree (4,4,3,2,4)
  (same comment as for once-through and cooling pond cooling systems as a fraction of all coo)
- water consumption, electricity production from NG, once-T and coolingP CS: 0.0005 m3/kWh; name WConsumption_EP_NG_onceT_andCP_CS; lognormal variance with pedigree 0.092025, pedigree (4,4,3,2,4)
  Estimated based on literature (Scown, 2011, Water Footprint of U.S. Transportation Fuels, SI).
  nan
- water consumption, electricity production from NG, recirculating CS: 0.0018 m3/kWh; name WConsumption_EP_NG_recirculatingCS; lognormal variance with pedigree 0.092025, pedigree (4,4,3,2,4)
  (same comment as for water consumption, electricity production from NG, once-T and coolingP)
- water withdrawal, electricity production from NG, once-T and coolingP CS: 0.098 m3/kWh; name WWithdrawal_EP_NG_onceT_andCP_CS; lognormal variance with pedigree 0.092025, pedigree (4,4,3,2,4)
  (same comment as for water consumption, electricity production from NG, once-T and coolingP)
- water withdrawal, electricity production from NG, recirculating CS: 0.0021 m3/kWh; name WWithdrawal_EP_NG_recirculating_CS; lognormal variance with pedigree 0.092025, pedigree (4,4,3,2,4)
  (same comment as for water consumption, electricity production from NG, once-T and coolingP)

## Reference product
- electricity, high voltage: 1 kWh; By-product classification allocatable product; CPC 17100: Electrical energy
  production volume 8.57011e9 kWh
  properties: carbon allocation 0 kg, carbon content 0, price 0.0977 EUR2005

## Inputs from technosphere
- gas power plant, 100MW electrical: 4.89389e-10 unit; lognormal variance with pedigree 0.1327, pedigree (3,3,4,3,3)
- natural gas, high pressure: 0.244499 m3; lognormal variance with pedigree 0, pedigree (1,1,3,1,1)
  properties: carbon content, fossil 0.602381, dry mass 0.84 kg, heating value, net 36 MJ, wet mass 0.84 kg
- residue from cooling tower: -8.80196e-6 kg; lognormal variance with pedigree 1.0747, pedigree (4,3,4,3,3)
  properties: carbon content, fossil 0.0544233, dry mass 0.7 kg, water content 0.428571, wet mass 1 kg
- water, completely softened: 0.0528117 kg; lognormal variance with pedigree 0.2206, pedigree (4,3,4,1,1)
  properties: wet mass 1 kg
- water, decarbonised: 1.76039 kg; lognormal variance with pedigree 0.2206, pedigree (4,3,4,1,1)
  properties: wet mass 1 kg

## Inputs from nature
- Water, cooling, unspecified natural origin [natural resource, in water]: 0.0520049 m3; lognormal variance with pedigree 0.092025, pedigree (4,4,4,2,4)

## Emissions to nature
- Acenaphthene [air, non-urban air or from high stacks]: 6.97995e-12 kg; lognormal variance with pedigree 0.6487, pedigree (3,3,5,3,3)
- Acetaldehyde [air, non-urban air or from high stacks]: 7.04156e-9 kg; lognormal variance with pedigree 1.0747, pedigree (4,3,5,3,3)
- Acetic acid [air, non-urban air or from high stacks]: 1.06504e-6 kg; lognormal variance with pedigree 1.0687, pedigree (3,3,5,3,3)
- Arsenic ion [air, non-urban air or from high stacks]: 3.6176e-10 kg; lognormal variance with pedigree 0.028, pedigree (3,5,4,5,3)
- Benzene [air, non-urban air or from high stacks]: 7.93936e-9 kg; lognormal variance with pedigree 0.6487, pedigree (3,3,5,3,3)
- Benzo(a)pyrene [air, non-urban air or from high stacks]: 4.65623e-12 kg; lognormal variance with pedigree 0.6487, pedigree (3,3,5,3,3)
- Beryllium II [air, non-urban air or from high stacks]: 2.17408e-11 kg; lognormal variance with pedigree 0.028, pedigree (3,5,4,5,3)
- Butane [air, non-urban air or from high stacks]: 8.15061e-6 kg; lognormal variance with pedigree 0.6487, pedigree (3,3,5,3,3)
- Cadmium II [air, non-urban air or from high stacks]: 1.98924e-9 kg; lognormal variance with pedigree 0.028, pedigree (3,5,4,5,3)
- Carbon dioxide, fossil [air, non-urban air or from high stacks]: 0.476329 kg; lognormal variance with pedigree 0.0514, pedigree (5,3,4,5,3)
- Carbon monoxide, fossil [air, non-urban air or from high stacks]: 9.74297e-5 kg; lognormal variance with pedigree 0.3408, pedigree (5,3,4,5,3)
- Chromium III [air, non-urban air or from high stacks]: 2.52616e-9 kg; lognormal variance with pedigree 0.028, pedigree (3,5,4,5,3)
- Cobalt II [air, non-urban air or from high stacks]: 1.51394e-10 kg; lognormal variance with pedigree 0.028, pedigree (3,5,4,5,3)
- Dinitrogen monoxide [air, non-urban air or from high stacks]: 8.59951e-6 kg; lognormal variance with pedigree 0.3087, pedigree (3,3,5,3,3)
- Dioxins, measured as 2,3,7,8-tetrachlorodibenzo-p-dioxin [air, non-urban air or from high stacks]: 2.55257e-16 kg; lognormal variance with pedigree 1.0747, pedigree (4,3,5,3,3)
- Ethane [air, non-urban air or from high stacks]: 1.20587e-5 kg; lognormal variance with pedigree 0.6487, pedigree (3,3,5,3,3)
- Formaldehyde [air, non-urban air or from high stacks]: 2.84303e-7 kg; lognormal variance with pedigree 0.6487, pedigree (3,3,5,3,3)
- Hexane [air, non-urban air or from high stacks]: 6.97995e-6 kg; lognormal variance with pedigree 0.6487, pedigree (3,3,5,3,3)
- Lead II [air, non-urban air or from high stacks]: 9.06601e-10 kg; lognormal variance with pedigree 0.028, pedigree (3,5,4,5,3)
- Manganese II [air, non-urban air or from high stacks]: 6.87433e-10 kg; lognormal variance with pedigree 0.028, pedigree (3,5,4,5,3)
- Mercury II [air, non-urban air or from high stacks]: 6.05575e-10 kg; lognormal variance with pedigree 0.6487, pedigree (3,3,5,3,3)
- Methane, fossil [air, non-urban air or from high stacks]: 3.72402e-5 kg; lognormal variance with pedigree 0.6808, pedigree (5,3,4,5,3)
- Nickel II [air, non-urban air or from high stacks]: 3.79364e-9 kg; lognormal variance with pedigree 0.028, pedigree (3,5,4,5,3)
- Nitrogen oxides [air, non-urban air or from high stacks]: 1.29952e-5 kg; lognormal variance with pedigree 0.3408, pedigree (5,3,4,5,3)
- PAH, polycyclic aromatic hydrocarbons [air, non-urban air or from high stacks]: 7.04156e-8 kg; lognormal variance with pedigree 1.0747, pedigree (4,3,5,3,3)
- Particulate Matter, < 2.5 um [air, non-urban air or from high stacks]: 4.32176e-6 kg; lognormal variance with pedigree 0.3027, pedigree (3,3,4,3,3)
- Particulate Matter, > 10 um [air, non-urban air or from high stacks]: 2.85764e-5 kg; lognormal variance with pedigree 0.0508, pedigree (5,3,4,5,3)
- Pentane [air, non-urban air or from high stacks]: 1.01222e-5 kg; lognormal variance with pedigree 0.6487, pedigree (3,3,5,3,3)
- Propane [air, non-urban air or from high stacks]: 6.20538e-6 kg; lognormal variance with pedigree 0.6487, pedigree (3,3,5,3,3)
- Propionic acid [air, non-urban air or from high stacks]: 1.40831e-7 kg; lognormal variance with pedigree 1.0747, pedigree (4,3,5,3,3)
- Selenium IV [air, non-urban air or from high stacks]: 4.32176e-11 kg; lognormal variance with pedigree 0.6487, pedigree (3,3,5,3,3)
- Sulfur dioxide [air, non-urban air or from high stacks]: 1.47222e-5 kg; lognormal variance with pedigree 0.0518, pedigree (5,3,4,5,3)
- Toluene [air, non-urban air or from high stacks]: 1.32029e-8 kg; lognormal variance with pedigree 0.6487, pedigree (3,3,5,3,3)
- Water [air, unspecified]: 0.000863746 m3; lognormal variance with pedigree 0.092025, pedigree (4,4,4,2,4)
- Water [water, unspecified]: 0.0529543 m3; lognormal variance with pedigree 0.092025, pedigree (4,4,4,2,4)

## Sampling procedure
literature and annual reports

## Extrapolations
All exchange data were extrapolated from datasets of the following 11 countries: AT, BE, DE, ES, FR, GB, IT, JP, LU, NL, US. The data of those countries basically rely on data of the former UCTE (see general comment).

The efficiency is based on IEA/OECD statistics and calculated with own assumptions.

The cooling and feed water use has been taken over from datasets for electricity production with hard coal or lignite.

Updated data for regionalization of Brazil (2014-2017):
- Annual Production Volume (specific data)
- Carbon dioxide, fossil (estimated data with US factors (Coelho, 2014))
- Carbon monoxide, fossil (estimated data with US factors (Coelho, 2014))
- Methane, fossil (estimated data with US factors (Coelho, 2014))
- Nitrogen oxides (estimated data with US factors (Coelho, 2014))
- Particulates >10 (estimated data with US factors (Coelho, 2014))
- Dinitrogen oxides (estimated data with US factors (Coelho, 2014))
- Sulfur dioxide (estimated data with US factors (Coelho, 2014))

## Review by Christopher Oberschelp 2018-05-08
Review not completed as ecoinvent has to run a full database calculation. Review has to continue afterwards.
