# treatment of waste yarn and waste textile, unsanitary landfill

Dataset: EcoSpold 2, unit process
Geography: RoW
Time period: 2010-01-01 to 2022-12-31
Technology level: current
Classification: ISIC rev.4 ecoinvent: 3821:Treatment and disposal of non-hazardous waste
Synonyms: municipal waste landfill
Scenario: Business-as-Usual
System model: Substitution, consequential, long-term
Generated by: Avraam Symeonidis
Database: ecoinvent
isCopyrightProtected: true
accessRestrictedTo: 1

## General comment
This dataset represents the activity of waste disposal of waste yarn and waste textile in a unsanitary landfill. Recommended use of this dataset: Unsanitary landfill of yarn and textile wastes. // Waste composition (wet, in ppm): H2O 20000; O 461180; H 58257; C 417780; S n.a.; N n.a.; P n.a.; B n.a.; Cl n.a.; Br n.a.; F n.a.; I n.a.; Ag n.a.; As n.a.; Ba n.a.; Cd 0.0046491; Co n.a.; Cr n.a.; Cu 149.09; Hg n.a.; Mn 22.89; Mo n.a.; Ni n.a.; Pb n.a.; Sb n.a.; Se n.a.; Sn n.a.; V n.a.; Zn 25.887; Be n.a.; Sc n.a.; Sr n.a.; Ti n.a.; Tl n.a.; W n.a.; Si n.a.; Fe 133.72; Ca 0.13758; Al n.a.; K n.a.; Mg n.a.; Na n.a.; . // Share of carbon in waste that is biogenic 100%. Share of metals in waste not oxidised and bulk-recyclable (exclude very small or thin parts) Iron: 0%; Alu: 0%; Copper: 0%. Overall degradability of waste during 100 years: 12%.
Cotton is assumed to have a certain composition no matter the form (yarn or textile). Composition is calculated based on cellulose which consitutes 96% of the dry mass of cotton. It is assumed that cotton has a 2% water content.
Additional composition of Cadmium, Manganese, Copper, Calcium, Iron and Zinc were extracted from Ghaffar et al., 2017.
References: http://textilefashionstudy.com/what-is-cotton-fiber-chemical-composition-of-cotton-fiber/,
Fazia Ghaffar, Ikhtiar Khan, Abid Mehmood, 2017, Effect of Elevated Atmospheric CO2 on the Nutritional Composition of Gossypium Hirsutim L. Seed (Upland Cotton). J. Appl. Environ. Biol. Sci. 2017 7(10): 97-106.
Jute is assumed to have a certain composition no matter the form (yarn, or textile). Composition is calculated based on cellulose (64.5%), lignin (12.5%), and Hemicelluloce (22.5%). Mannose and Xylose are assumed to constitute hemicelluloce on equal basis. It is assumed that jute has a 2% water content.
Reference: http://textilefashionstudy.com/jute-fiber-natural-fiber-for-environment-safety/
Picture attribution: Dumping garbage at the Croton landfill operation. Records of the Environmental Protection Agency, 1944 - 2006, permanent link: https://catalog.archives.gov/id/549945
Cotton is assumed to have a certain composition no matter the form (yarn or textile). Composition is calculated based on cellulose which consitutes 96% of the dry mass of cotton. It is assumed that cotton has a 2% water content.
Additional composition of Cadmium, Manganese, Copper, Calcium, Iron and Zinc were extracted from Ghaffar et al., 2017.
References: http://textilefashionstudy.com/what-is-cotton-fiber-chemical-composition-of-cotton-fiber/,
Fazia Ghaffar, Ikhtiar Khan, Abid Mehmood, 2017, Effect of Elevated Atmospheric CO2 on the Nutritional Composition of Gossypium Hirsutim L. Seed (Upland Cotton). J. Appl. Environ. Biol. Sci. 2017 7(10): 97-106.

## Included activities start
from final waste deposition (without transports to the site)

## Included activities end
Waste-specific short-term emissions to air via landfill gas and landfill leachate. Waste-specific long-term emissions from landfill.

## Geography
Given name of landfill location is 'Global'. Landfill site with mean annual temperature (MAT) of 14.74 degC, mean annual precipitation (MAP) of 889 mm/year, and net infiltration of 392 mm/year.
Based on data from UNSD, the population weighted average global precipitation rate is 889 mm and the average global actual evapotranspiration is 497mm (based on UNSD Environmental Indicators - Water Resources, version October 2016. Accessed at https://unstats.un.org/unsd/environment/excel_file_tables/2013/Water%20Resources.xlsx on 30.01.2018.

## Technology
This is an inventory for an unsanitary, sub-controlled landfill for municipal solid waste. Ultimate average landfill height is 15 meters. Operation phase duration is 25 years.Percentage of landfill gas directly emitted is 100w%.
Leachate of the landfill is not treated. Based on average waste composition and climate data the end of carbonate phase is estimated to be reached 4295 years after waste deposition.

## Reference product
- waste yarn and waste textile: -1 kg; By-product classification Waste; CPC 39214: Cotton waste, except garnetted stock; normal variance with pedigree 0, pedigree (1,1,1,1,1)
  production volume 9.54423e8 kg
  properties: carbon allocation 0.43529 kg, carbon content 0.44455, carbon content, fossil 0, carbon content, non-fossil 0.44455, dry mass 0.97917 kg, heating value, net 13.14 MJ, hydrogen content 0.06215, oxygen content 0.4933, price 0 EUR2005, water content 0.0212731, water in wet mass 0.02083 kg, wet mass 1 kg

## Inputs from technosphere
- diesel, burned in building machine: 0.046738 MJ; lognormal variance with pedigree 0.08026, pedigree (1,1,3,1,1)
  properties: heating value, net 1 MJ
- excavation, skid-steer loader: 0.00031708 m3; lognormal variance with pedigree 0.08026, pedigree (1,1,3,1,1)

## Inputs from nature
- Occupation, dump site [natural resource, land]: 0.0023333 m2*year; lognormal variance with pedigree 0.08026, pedigree (1,1,3,1,1)

## Emissions to nature
- Cadmium II [air, non-urban air or from high stacks]: 6.5444e-13 kg; lognormal variance with pedigree 0.708, pedigree (1,1,3,1,1)
- Calcium [air, non-urban air or from high stacks]: 5.3741e-13 kg; lognormal variance with pedigree 0.8017, pedigree (1,1,3,1,1)
- Carbon dioxide, non-fossil [air, non-urban air or from high stacks]: 0.078615 kg; lognormal variance with pedigree 0, pedigree (1,1,3,1,1)
- Copper ion [air, non-urban air or from high stacks]: 2.5031e-11 kg; lognormal variance with pedigree 0.6742, pedigree (1,1,3,1,1)
- Iron ion [air, non-urban air or from high stacks]: 5.5102e-11 kg; lognormal variance with pedigree 0.6493, pedigree (1,1,3,1,1)
- Manganese II [air, non-urban air or from high stacks]: 7.8648e-10 kg; lognormal variance with pedigree 0.5638, pedigree (1,1,3,1,1)
- Methane, non-fossil [air, non-urban air or from high stacks]: 0.036311 kg; lognormal variance with pedigree 0.04315, pedigree (1,1,3,1,1)
- Zinc II [air, non-urban air or from high stacks]: 3.2703e-11 kg; lognormal variance with pedigree 0.6679, pedigree (1,1,3,1,1)
- BOD5, Biological Oxygen Demand [water, ground-]: 0.00037809 kg; lognormal variance with pedigree 0.1286, pedigree (1,1,3,1,1)
- BOD5, Biological Oxygen Demand [water, ground-, long-term]: 0.095195 kg; lognormal variance with pedigree 0.005635, pedigree (1,1,3,1,1)
- COD, Chemical Oxygen Demand [water, ground-]: 0.0015971 kg; lognormal variance with pedigree 0.1286, pedigree (1,1,3,1,1)
- COD, Chemical Oxygen Demand [water, ground-, long-term]: 0.40212 kg; lognormal variance with pedigree 0.005635, pedigree (1,1,3,1,1)
- Cadmium II [water, ground-]: 9.8167e-11 kg; lognormal variance with pedigree 0.55, pedigree (1,1,3,1,1)
- Cadmium II [water, ground-, long-term]: 4.5503e-9 kg; lognormal variance with pedigree 0.4805, pedigree (1,1,3,1,1)
- Calcium II [water, ground-]: 2.1496e-9 kg; lognormal variance with pedigree 0.534, pedigree (1,1,3,1,1)
- Calcium II [water, ground-, long-term]: 1.3543e-7 kg; lognormal variance with pedigree 0.4559, pedigree (1,1,3,1,1)
- Copper ion [water, ground-]: 8.7608e-8 kg; lognormal variance with pedigree 0.4078, pedigree (1,1,3,1,1)
- Copper ion [water, ground-, long-term]: 0.000149 kg; lognormal variance with pedigree 0.2272, pedigree (1,1,3,1,1)
- DOC, Dissolved Organic Carbon [water, ground-]: 0.0014602 kg; lognormal variance with pedigree 0.1286, pedigree (1,1,3,1,1)
- DOC, Dissolved Organic Carbon [water, ground-, long-term]: 0.36765 kg; lognormal variance with pedigree 0.005635, pedigree (1,1,3,1,1)
- Iron ion [water, ground-]: 2.2041e-7 kg; lognormal variance with pedigree 0.3779, pedigree (1,1,3,1,1)
- Iron ion [water, ground-, long-term]: 0.0001335 kg; lognormal variance with pedigree 0.2308, pedigree (1,1,3,1,1)
- Manganese II [water, ground-]: 3.1459e-6 kg; lognormal variance with pedigree 0.3129, pedigree (1,1,3,1,1)
- Manganese II [water, ground-, long-term]: 1.9743e-5 kg; lognormal variance with pedigree 0.2899, pedigree (1,1,3,1,1)
- TOC, Total Organic Carbon [water, ground-]: 0.0014602 kg; lognormal variance with pedigree 0.1286, pedigree (1,1,3,1,1)
- TOC, Total Organic Carbon [water, ground-, long-term]: 0.36765 kg; lognormal variance with pedigree 0.005635, pedigree (1,1,3,1,1)
- Zinc II [water, ground-]: 1.4716e-7 kg; lognormal variance with pedigree 0.3936, pedigree (1,1,3,1,1)
- Zinc II [water, ground-, long-term]: 2.574e-5 kg; lognormal variance with pedigree 0.2855, pedigree (1,1,3,1,1)

## Sampling procedure
The waste composition was derived from literature. All information are found in the general comment. The UPR-LCI is created with a model for waste-specific and climate-specific life cycle inventories of open dumps and unsanitary landfilling of waste.

Reference for the model:
Doka G. (2017) A model for waste-specific and climate-specific life cycle inventories of open dumps and
unsanitary landfilling of waste. Doka Life Cycle Assessments, Zurich, Switzerland. Available at
http://www.doka.ch/publications.htm

## Review by Gabor Doka 2018-02-15
passed
