# treatment of brake wear emissions, passenger car

Dataset: EcoSpold 2, unit process
Geography: RoW
Time period: 2012-01-01 to 2022-12-31
Technology level: current
Classification: ISIC rev.4 ecoinvent: 3821:Treatment and disposal of non-hazardous waste
Scenario: Business-as-Usual
System model: Substitution, consequential, long-term
Generated by: Andrew Simons
Published in: Ntziachristos L., Paul P. 2009
Database: ecoinvent
isCopyrightProtected: true
accessRestrictedTo: 1

## General comment
This dataset represents the treatment of non-exhaust emissions produced by brake abrasion from average passenger car. The datasets are treatments because they represent a removal of substances from the technosphere (removal of brake material).
This dataset is valid for the whole world and represents the average data for the operation of an average passenger car.
Calculation of non-exhaust emissions (tyre, brake and road wear emissions as well as petrol evaporation emissions) are based on: Ntziachristos, L., Boulter, P. (2009b). EMEP/EEA air pollutant emissions inventory guidebook 2009: Road vehicle tyre and brake wear; Road surface wear. Copenhagen, European Environment Agency.
The emission factors relate to 1kg brake wear. The quantity of brake wear emissions per kg vehicle and km is defined in the transport datasets.
The brake wear emissions are to air, water and soil. All particulates are accounted for as emissions to air and have particle sizes below 100um. Anything above this does not remain airborne over longer periods. Total particulates equals total of all air emission substances. The fractions to water and soil are calculated by deducting the airborne emissions from the total tyre wear. This remaining amount is then simply split 50/50 between water and soil.

## Included activities start
The activity starts with the friction of passenger car brakes

## Included activities end
The activity ends with emissions of passenger car brake wear

## Reference product
- brake wear emissions, passenger car: -1 kg; By-product classification Waste; CPC 49129: Other parts and accessories n.e.c. of motor vehicles (including brakes, gear boxes, axles, road wheels, suspen[…]
  production volume 1.342e8 kg
  properties: carbon allocation 0 kg, carbon content 0, price 0 EUR2005

## Emissions to nature
All rows: lognormal variance with pedigree 0.0021, pedigree (2,2,5,4,1)
- Aluminium III [air, urban air close to ground]: 0.00285 kg
- Antimony ion [air, urban air close to ground]: 0.139 kg
- Arsenic ion [air, urban air close to ground]: 9.38e-5 kg
- Barium II [air, urban air close to ground]: 0.0535 kg
- Bromine [air, urban air close to ground]: 5.56e-5 kg
- Cadmium II [air, urban air close to ground]: 3.11e-5 kg
- Calcium [air, urban air close to ground]: 0.0107 kg
- Chlorine [air, urban air close to ground]: 0.00208 kg
- Chromium III [air, urban air close to ground]: 8.89e-6 kg
- Cobalt II [air, urban air close to ground]: 8.89e-6 kg
- Copper ion [air, urban air close to ground]: 0.071 kg
- Elemental carbon [air, urban air close to ground]: 0.0363 kg
- Iron ion [air, urban air close to ground]: 0.291 kg
- Lead II [air, urban air close to ground]: 0.00843 kg
- Lithium I [air, urban air close to ground]: 7.72e-5 kg
- Manganese II [air, urban air close to ground]: 0.00342 kg
- Molybdenum VI [air, urban air close to ground]: 0.0139 kg
- Nickel II [air, urban air close to ground]: 0.000454 kg
- Nitrate [air, urban air close to ground]: 0.00222 kg
- Organic carbon [air, urban air close to ground]: 0.149 kg
- PAH, polycyclic aromatic hydrocarbons [air, urban air close to ground]: 2.47e-6 kg
- Particulate Matter, < 2.5 um [air, urban air close to ground]: 0.39 kg
- Particulate Matter, > 10 um [air, urban air close to ground]: 0.02 kg
- Particulate Matter, > 2.5 um and < 10um [air, urban air close to ground]: 0.59 kg
- Potassium I [air, urban air close to ground]: 0.000727 kg
- Selenium IV [air, urban air close to ground]: 2.78e-5 kg
- Silicon [air, urban air close to ground]: 0.0943 kg
- Sodium [air, urban air close to ground]: 0.0108 kg
- Strontium [air, urban air close to ground]: 0.000722 kg
- Sulfate [air, urban air close to ground]: 0.0464 kg
- Sulfur dioxide [air, urban air close to ground]: 0.0356 kg
- Tin ion [air, urban air close to ground]: 0.00972 kg
- Titanium ion [air, urban air close to ground]: 0.005 kg
- Vanadium V [air, urban air close to ground]: 0.000917 kg
- Zinc II [air, urban air close to ground]: 0.0121 kg

## Sampling procedure
Literature

## Extrapolations
Extrapolation from dataset of Switzerland using GDP per capita and p/v values.Source:
Shafer A., The global demand for motorized mobility, 1998, Elsevier
<http://www.sciencedirect.com/science/article/pii/S0965856498000044>
World Bank.org
<http://data.worldbank.org/indicator/NY.GDP.PCAP.CD/countries?display=default>
