# sodium silicate production, spray powder, 80%

Dataset: EcoSpold 2, unit process
Geography: RoW
Time period: 1995-01-01 to 2022-12-31
Technology level: current
Classification: ISIC rev.4 ecoinvent: 2011:Manufacture of basic chemicals
Synonyms: Sodium sesquisilicate; Sodium polysilicate; SODIUM SILICATE; Waterglass; Sodium metasilicate; Sodium siliconate
Scenario: Business-as-Usual
System model: Substitution, consequential, long-term
Generated by: Roland Hischier
Published in: Zah R. 2007
Database: ecoinvent
isCopyrightProtected: true
accessRestrictedTo: 1

## General comment
This dataset represents the production of 1 kg of sodium silicate powder (80%) from sodium silicate (48% in water) by the hydrothermal process. There are currently three principal areas of use for sodium silicates: as a raw material in detergents, as a starting material for the chemical industry, and as an adhesive in various fields. In detergents, sodium silicates serve as builder, corrosion inhibitor and additive. Material and energy inputs as well as waste production and emission to air and water are based on literature sources. The infrastructure is estimated based on a large chemical plant.
References:
Zah R., Hischier R. (2007) Life Cycle Inventories of Detergents. ecoinvent report No. 12. Swiss Centre for Life Cycle Inventories, Dübendorf, 2007.

## Included activities start
From reception of sodium silicate (hydrothermal liquor, 48 % in water) at the factory gate.

## Included activities end
This activity ends with the production of 1 kg of sodium silicate powder (80%). The dataset includes material and energy input, production of waste, emissions and infrastructure.

## Geography
Average data from 6 European producers. The inventory is assumed to be representative of the global production.

## Technology
The hydrothermal process is one of the two main processes used to produce sodium silicate, the other one being the furnace process.
In the hydrothermal process, sand is dissolved in sodium hydroxide. This process is carried out under high temperature and pressure in an autoclave. After filtration sodium silicate is obtained in a 48% solution. Spray-drying of the hydrothermal 48% sodium silicate solution obtained after filtration produces a powder of 80%. The sodium silicate solution can be reacted again with sodium hydroxide. Metasilicate crystallises out and can be used in its solid form.
This represents an average technology in Europe.
References:
Zah R., Hischier R. (2007) Life Cycle Inventories of Detergents. ecoinvent report No. 12. Swiss Centre for Life Cycle Inventories, Dübendorf, 2007.

## Time period
Producer information for the year 1995.

## Parameters
- fraction, cooling water, cooling pond system, to air: 0.032 dimensionless; name fraction_CW_CP_to_air; lognormal variance with pedigree 0.0413, pedigree (2,3,1,3,1)
  Calculated based on literature value (Scown, C.D., 2011, Water Footprint of U.S. Transportation Fuels and supplying information of the article) (Vionnet, S., Quantis Water Database - Technical Report, 2012).
- fraction, cooling water, once-through system, to air: 0.004 dimensionless; name fraction_CW_OT_to_air; lognormal variance with pedigree 0.0413, pedigree (2,3,1,3,1)
  (same comment as for fraction, cooling water, cooling pond system, to air)
- fraction, cooling water, recirculating system, to air: 0.771 dimensionless; name fraction_CW_R_to_air; lognormal variance with pedigree 0.0413, pedigree (2,3,1,3,1)
  (same comment as for fraction, cooling water, cooling pond system, to air)
- fraction, cooling water, to air: 0.3875 dimensionless; name fraction_CW_to_air; = (0.5*fraction_CW_OT_to_air)+(0.5*fraction_CW_R_to_air); lognormal variance with pedigree 0.092025, pedigree (4,4,3,2,4)
  Calculated value based on literature value (see comments of the other parametres present in this dataset) and expert opinion. In the case when no industry/literature data are available about the type of cooling or directly fraction, cooling water, to air specific for the process a default assumption is applied. It is assumed that the once-through cooling system is used in 50% of all cases and recirculating system is used in another 50% of all cases.
- fraction, process water, to air: 0.998255 dimensionless; name fraction_PW_to_air; lognormal variance with pedigree 0.092025, pedigree (4,4,3,2,4)
  Literature value (IPPC, 2007) (Vionnet, S., Quantis Water Database - Technical Report, 2012).

## Reference product
- sodium silicate, spray powder, 80%: 1 kg; By-product classification allocatable product; CPC 34270: Cyanides, cyanide oxides and complex cyanides; fulminates, cyanates and thiocyanates; silicates; borates; perb[…]
  production volume 2.891e9 kg
  properties: carbon allocation 0 kg, carbon content 0, carbon content, fossil 0, carbon content, non-fossil 0, dry mass 1 kg, price 0.22 EUR2005, water content 0, water in wet mass 0 kg, wet mass 1 kg

## Inputs from technosphere
- chemical factory, organics: 4e-10 unit; lognormal variance with pedigree 0.3098, pedigree (2,3,5,4,3)
- electricity, medium voltage: 0.0178208, 0.000666767, 0.0084715, 0.147033, 0.012346, 0.000661739 kWh (6 suppliers, which the file names only by identifier); sum of these 0.187 kWh; lognormal variance with pedigree 0.0029, pedigree (2,2,5,5,1)
- heat, district or industrial, natural gas: 0.824732, 5.43527 MJ (2 suppliers, which the file names only by identifier); sum of these 6.26 MJ; lognormal variance with pedigree 0.0029, pedigree (2,2,5,5,1)
  properties: heating value, net 1 MJ
- heat, district or industrial, other than natural gas: 0.000108772, 0.0622912 MJ (2 suppliers, which the file names only by identifier); sum of these 0.0624 MJ; lognormal variance with pedigree 0.0029, pedigree (2,2,5,5,1)
  properties: heating value, net 1 MJ
- inert waste, for final disposal: -0.00271 kg; lognormal variance with pedigree 0.0029, pedigree (2,2,2,5,1)
  properties: dry mass 0.995 kg, water content 0.00502513, wet mass 1 kg
- sodium silicate, without water, in 48% solution state: 1.04 kg; lognormal variance with pedigree 0.0029, pedigree (2,2,5,5,1)
  properties: dry mass 1 kg, wet mass 1 kg
- steam, in chemical industry: 0.709 kg; lognormal variance with pedigree 0.0029, pedigree (2,2,5,5,1)
  properties: dry mass 0.0001 kg, water content 9999, wet mass 1 kg

## Inputs from nature
- Water, cooling, unspecified natural origin [natural resource, in water]: 0.0012192 m3; lognormal variance with pedigree 0.0129, pedigree (2,2,5,5,1)
- Water, unspecified natural origin [natural resource, in water]: 0.000460804 m3; lognormal variance with pedigree 0.0148, pedigree (3,3,5,5,1)

## Emissions to nature
- Water [air, unspecified]: 0.000932438 m3; lognormal variance with pedigree 0.0427, pedigree (2,2,5,5,1)
- Silicon [water, surface water]: 0.0176 kg; lognormal variance with pedigree 0.0429, pedigree (2,2,5,5,1)
- Water [water, unspecified]: 0.000747562 m3; lognormal variance with pedigree 0.0427, pedigree (2,2,5,5,1)

## Sampling procedure
Data based on questionnaires and literature.

## Extrapolations
This dataset has been copied from an original dataset covering the geography RER. The uncertainty has been adjusted accordingly.

## Review by Emilia Moreno Ruiz 2017-08-08
This dataset was additionally reviewed in a separate review process by Eric Johnson of Atlantic Consulting as well as Emilia Moreno Ruiz and Gregor Wernet of ecoinvent.
