# propyl acetate production

Dataset: EcoSpold 2, unit process
Geography: RoW
Time period: 2010-01-01 to 2022-12-31
Technology level: current
Classification: ISIC rev.4 ecoinvent: 2011:Manufacture of basic chemicals
Synonyms: C5H10O2
Scenario: Business-as-Usual
System model: Substitution, consequential, long-term
Share of production covered: 100 %
Generated by: Jürgen Sutter
Database: ecoinvent
isCopyrightProtected: true
accessRestrictedTo: 1

## General comment
The process “propyl acetate, at plant, GLO" is modelled for the production of propyl acetate from propanol. Raw materials are modelled with a stoechiometric calculation. Emissions are estimated. Energy consumptions, infrastructure and transports are calculated with standard values.
Propyl acetate (synonyms: propyl acetate; n-propyl ethanoate; propylacetate; acetic acid propyl ester) is produced by an esterification of propanol: C3H8O + C2H4O2 → C5H10O2 + H2O. Propanols can be converted into propyl esters by reaction with organic and inorganic acids using the conventional method for esterification in the presence of mineral-acid catalysts. The commercially important n-propyl acetate and isopropyl acetate are produced by direct esterification of the corresponding alcohols with acetic acid in the presence of sulfuric acid, p-toluenesulfonic acid, methanesulfonic acid, or a strong cationic resin as catalyst. A higher-pressure (170 – 310 kPa) continuous process at 110 – 160 °C with continuous removal of product ester and water has been described, which should offer higher production rates . 1-Propanol can also undergo ester interchange with methyl or ethyl acetate in the presence of a strong cationic exchange resin to give n-propyl acetate.
Propyl acetate is used as solvent and as a flavouring additive.
Frischknecht R., Jungbluth N., Althaus H.-J., Doka G., Dones R., Heck T., Hellweg S., Hischier R., Nemecek T., Rebitzer G. and Spielmann M. (2007) Overview and Methodology. Final report ecoinvent v2.0 No. 1. Swiss Centre for Life Cycle Inventories, Dübendorf, CH, retrieved from: www.ecoinvent.org.
Gendorf (2000) Umwelterklärung 2000, Werk Gendorf. Werk Gendorf, Burgkirchen as pdf-File under: http://www.gendorf.de/pdf/umwelterklaerung2000.pdf
Kim 2003 Kim S., Overcash M.: Energy in chemical manufacturing processes: gate-to-gate information for life cycle assessment. In: Journal of Chemical Technology & Biotechnology vol. 78, no. 9: 995-1005(11). 2003
Wilhelm Riemenschneider/Hermann M. Bolt: Esters, Organic. Published online: 2000. In: Ullmann's Encyclopedia of Industrial Chemistry, Seventh Edition, 2004 Electronic Release (ed. Fiedler E., Grossmann G., Kersebohm D., Weiss G. and Witte C.). 7 th Electronic Release Edition. Wiley InterScience, New York, Online-Version under: DOI: 10.1002/14356007.a09_565.pub2

## Included activities end
production of propyl acetate including materials, energy uses, infrastructure, and emissions

## Geography
The inventory is modelled for the world.

## Technology
esterification of propanol

## Time period
Time of publications

## Parameters
- fraction, cooling water, cooling pond system, to air: 0.032 dimensionless; name fraction_CW_CP_to_air; lognormal variance with pedigree 0.0413, pedigree (2,3,1,3,1)
  Calculated based on literature value (Scown, C.D., 2011, Water Footprint of U.S. Transportation Fuels and supplying information of the article) (Vionnet, S., Quantis Water Database - Technical Report, 2012).
- fraction, cooling water, once-through system, to air: 0.004 dimensionless; name fraction_CW_OT_to_air; lognormal variance with pedigree 0.0413, pedigree (2,3,1,3,1)
  (same comment as for fraction, cooling water, cooling pond system, to air)
- fraction, cooling water, recirculating system, to air: 0.771 dimensionless; name fraction_CW_R_to_air; lognormal variance with pedigree 0.0413, pedigree (2,3,1,3,1)
  (same comment as for fraction, cooling water, cooling pond system, to air)
- fraction, cooling water, to air: 0.3875 dimensionless; name fraction_CW_to_air; = (0.5*fraction_CW_OT_to_air)+(0.5*fraction_CW_R_to_air); lognormal variance with pedigree 0.092025, pedigree (4,4,3,2,4)
  Calculated value based on literature value (see comments of the other parametres present in this dataset) and expert opinion. In the case when no industry/literature data are available about the type of cooling or directly fraction, cooling water, to air specific for the process a default assumption is applied. It is assumed that the once-through cooling system is used in 50% of all cases and recirculating system is used in another 50% of all cases.

## Reference product
- isopropyl acetate: 1 kg; By-product classification allocatable product; CPC 34140: Carboxylic acids and their anhydrides, halides, peroxides and peroxyacids and their halogenated, sulphonated, […]
  production volume 6.7e6 kg
  properties: carbon allocation 0.588235 kg, carbon content 0.588235, carbon content, fossil 0.588235, carbon content, non-fossil 0, dry mass 1 kg, heating value, net 29.68 MJ, price 1.14986 EUR2005, water content 0, water in wet mass 0 kg, wet mass 1 kg

## Inputs from technosphere
- 1-propanol: 0.6192 kg; lognormal variance with pedigree 0.0255, pedigree (4,5,4,1,1)
  properties: carbon content, fossil 0.6, dry mass 1 kg, heating value, net 34.3 MJ, wet mass 1 kg
- acetic acid, without water, in 98% solution state: 0.6192 kg; lognormal variance with pedigree 0.0255, pedigree (4,5,4,1,1)
  properties: carbon content, fossil 0.400016, dry mass 1 kg, heating value, net 14.6 MJ, wet mass 1 kg
- chemical factory, organics: 4e-10 unit; lognormal variance with pedigree 0.3184, pedigree (4,5,5,5,5)
- electricity, medium voltage: 0.000690912, 2.58506e-5, 0.00032844, 0.00570049, 0.000478656, 2.56557e-5 kWh (6 suppliers, which the file names only by identifier); sum of these 0.00725 kWh; lognormal variance with pedigree 0.0036, pedigree (1,2,5,1,1)
- heat, from steam, in chemical industry: 8.84 MJ; lognormal variance with pedigree 0.0036, pedigree (1,2,5,1,1)
  properties: heating value, net 1 MJ

## Inputs from nature
- Water, cooling, unspecified natural origin [natural resource, in water]: 0.024 m3; lognormal variance with pedigree 0.0255, pedigree (4,5,4,1,1)

## Emissions to nature
- Acetic acid [air, urban air close to ground]: 0.0012384 kg; lognormal variance with pedigree 0.1786, pedigree (4,5,5,5,5)
- Carbon dioxide, fossil [air, urban air close to ground]: 0.09808 kg; lognormal variance with pedigree 0.1786, pedigree (4,5,5,5,5)
- Propanol [air, urban air close to ground]: 0.0012384 kg; lognormal variance with pedigree 0.1786, pedigree (4,5,5,5,5)
- Water [air, unspecified]: 0.0093 m3; lognormal variance with pedigree 0.092025, pedigree (4,4,5,2,4)
- Acetic acid [water, surface water]: 0.0029721 kg; lognormal variance with pedigree 0.3184, pedigree (4,5,5,5,5)
- BOD5, Biological Oxygen Demand [water, surface water]: 0.0098771 kg; lognormal variance with pedigree 0.218, pedigree (4,5,5,5,5)
- COD, Chemical Oxygen Demand [water, surface water]: 0.0098771 kg; lognormal variance with pedigree 0.218, pedigree (4,5,5,5,5)
- DOC, Dissolved Organic Carbon [water, surface water]: 0.002971 kg; lognormal variance with pedigree 0.218, pedigree (4,5,5,5,5)
- Propanol [water, surface water]: 0.0029721 kg; lognormal variance with pedigree 0.3184, pedigree (4,5,5,5,5)
- TOC, Total Organic Carbon [water, surface water]: 0.002971 kg; lognormal variance with pedigree 0.218, pedigree (4,5,5,5,5)
- Water [water, unspecified]: 0.0147 m3; lognormal variance with pedigree 0.092025, pedigree (4,4,5,2,4)

## Sampling procedure
Literature data

## Extrapolations
Emissions are modelled with standard methods.
