# ioxynil production

Dataset: EcoSpold 2, unit process
Geography: GLO
Time period: 2021-01-01 to 2022-12-31
Technology level: current
Classification: ISIC rev.4 ecoinvent: 2011:Manufacture of basic chemicals
Scenario: Business-as-Usual
System model: Substitution, consequential, long-term
Generated by: Daria Dellenbach
Database: ecoinvent
isCopyrightProtected: true
accessRestrictedTo: 1

## General comment
This dataset represents the production of 1 kg of ioxynil. Emissions are estimated. Energy consumptions, infrastructure and transports are calculated with standard values. A yield of 95% per chemical step was assumed.
Ioxynil is an organic substance with the CAS no.: 001689-83-4. It is called '4-hydroxy-3,5-diiodo-benzonitrile' under IUPAC naming and its molecular formula is: C7H3I2NO. It is solid under normal conditions of temperature and pressure with no distinct odor. It is modelled as a pure substance. Ioxynil is a selective contact molluscicide. It can be applied post-emergence to control of a wide range of annual broad-leaved weeds in cereals, onions, leeks, garlic, shallots, flax, sugar cane, forage grasses and lawns. There are no publicly available information about the consumption of this substance on industrial sites.
Reference(s):
Chemiepark GENDORF, Umwelterklärung 2016, https://www.gendorf.de/Nachbarn/Umweltschutz/Industrie%20und%20Nachhaltigkeit
Chemiepark GENDORF, Umwelterklärung 2017, https://www.gendorf.de/Nachbarn/Umweltschutz/Industrie%20und%20Nachhaltigkeit
Chemiepark GENDORF, Umwelterklärung 2020, https://www.gendorf.de/Nachbarn/Umweltschutz/Industrie%20und%20Nachhaltigkeit
Unger T., (1996). Pesticide Synthesis Handbook, Noyes Publication.
Appleby A.P., Muller F., Carpy, S., (2011): Weed Control, in Ullmanns Encyclopedia of Industrial Chemistry, Weinheim, Wiley-VCH.
Hischier, R. (2005) Establishing Life Cycle Inventories of Chemicals Based on Differing Data Availability (9 pp). The International Journal of Life Cycle Assessment, Volume 10, Issue 1, pp 59–67. 10.1065/lca2004.10.181.7

## Included activities start
Cradle to gate. The activity starts when the raw materials enter the process.

## Included activities end
Production of ioxynil production including materials, energy uses, infrastructure and emissions.

## Technology
This dataset represents the production of 1 kg of ioxynil.
Ioxynil is produced in four steps from phenol:
C6H6O + CHCl3 + KOH --> C7H6O2 + 2 HCl + KCl
C7H6O2 + 2 I2 --> C7H4I2O2 + HI
C7H4I2O2 + NH3O --> C7H5I2NO2 + H2O
C7H5I2NO2 --> C7H2I2NO + H2O
Precursors that are used for the ioxynil production are hydroxylamine (NH3O) and nitrous dioxide (NO2).
Sodium hydroxide is added to neutralise the formed hydrochloric acid and the released as chloride, sodium and water.
Reference(s):
Unger T., (1996). Pesticide Synthesis Handbook, Noyes Publication.
Appleby A.P., Muller F., Carpy, S., (2011): Weed Control, in Ullmanns Encyclopedia of Industrial Chemistry, Weinheim, Wiley-VCH.

## Reference product
- ioxynil: 1 kg; By-product classification allocatable product; CPC 34150: Amine-function compounds; oxygen-function amino-compounds, except lysine and its esters and salts thereof and […]
  production volume 4 kg
  properties: carbon allocation 0.227292 kg, carbon content 0.227292, carbon content, fossil 0.227292, carbon content, non-fossil 0, dry mass 1 kg, price 2.20453 EUR2005, water content 0, water in wet mass 0 kg, wet mass 1 kg

## Inputs from technosphere
- chemical factory, organics: 1.444e-9 unit; lognormal variance with pedigree 0.3492, pedigree (2,5,2,4,4)
- compressed air, 1000 kPa gauge: 1.16019, 0.472106 m3 (2 suppliers, which the file names only by identifier); sum of these 1.6323 m3; lognormal variance with pedigree 0.0498, pedigree (2,5,2,4,4)
- electricity, medium voltage: 1.44061 kWh; lognormal variance with pedigree 0.0498, pedigree (2,5,2,4,4)
- heat, district or industrial, natural gas: 6.81027 MJ; lognormal variance with pedigree 0.0498, pedigree (2,5,2,4,4)
  properties: heating value, net 1 MJ
- heat, from steam, in chemical industry: 0.112438, 0.63772 MJ (2 suppliers, which the file names only by identifier); sum of these 0.750158 MJ; lognormal variance with pedigree 0.0498, pedigree (2,5,2,4,4)
  properties: heating value, net 1 MJ
- hydroxylamine: 0.0822967, 0.0173361 kg (2 suppliers, which the file names only by identifier); sum of these 0.0996328 kg; lognormal variance with pedigree 0.0098, pedigree (2,5,2,2,2)
  properties: dry mass 1 kg, heating value, net 11.01 MJ, wet mass 1 kg
- iodine: 1.61665 kg; lognormal variance with pedigree 0.0098, pedigree (2,5,2,2,2)
  properties: dry mass 1 kg, wet mass 1 kg
- nitrogen, liquid: 0.0267357, 0.0267357 kg (2 suppliers, which the file names only by identifier); sum of these 0.0534713 kg; lognormal variance with pedigree 0.0498, pedigree (2,5,2,4,4)
  properties: dry mass 1 kg, wet mass 1 kg
- phenolic resin: 0.054623, 0.259302 kg (2 suppliers, which the file names only by identifier); sum of these 0.313925 kg; lognormal variance with pedigree 0.0098, pedigree (2,5,2,2,2)
  properties: carbon content, fossil 0.772277, dry mass 1 kg, heating value, net 33.57 MJ, wet mass 1 kg
- potassium hydroxide: 0.187147 kg; lognormal variance with pedigree 0.0098, pedigree (2,5,2,2,2)
  properties: dry mass 0.856 kg, water content 0.168224, wet mass 1 kg
- sodium hydroxide, without water, in 50% solution state: 0.252225 kg; lognormal variance with pedigree 0.0098, pedigree (2,5,2,1,2)
  properties: dry mass 1 kg, heating value, net 3.03 MJ, wet mass 1 kg
- tap water: 0.081225 kg; lognormal variance with pedigree 0.0498, pedigree (2,5,2,4,4)
  properties: carbon content, fossil 0.00178991, dry mass 0.000337476 kg, water content 2962.17, wet mass 1 kg
- trichloromethane: 0.257991, 0.140775 kg (2 suppliers, which the file names only by identifier); sum of these 0.398766 kg; lognormal variance with pedigree 0.0098, pedigree (2,5,2,2,2)
  properties: carbon content, fossil 0.101695, dry mass 1 kg, heating value, net 4.06 MJ, wet mass 1 kg
- wastewater, average: -1.5741e-6, -3.95595e-8, -6.58287e-6, -2.34375e-8 m3 (4 suppliers, which the file names only by identifier); sum of these -8.21997e-6 m3; lognormal variance with pedigree 0.0498, pedigree (2,5,1,4,4)
  properties: carbon content, non-fossil 0.194039, dry mass 0.346837 kg, water content 2882.2, wet mass 1000 kg

## Inputs from nature
- Water, cooling, unspecified natural origin [natural resource, in water]: 0.0530923 m3; lognormal variance with pedigree 0.0498, pedigree (2,5,2,4,4)
- Water, river [natural resource, in water]: 0.0034852 m3; lognormal variance with pedigree 0.0498, pedigree (2,5,2,4,4)
- Water, well, in ground [natural resource, in water]: 0.00294764 m3; lognormal variance with pedigree 0.0498, pedigree (2,5,2,4,4)

## Emissions to nature
- Carbon dioxide, fossil [air, unspecified]: 0.1982 kg; lognormal variance with pedigree 0.0098, pedigree (2,5,2,2,2)
- Nitrogen [air, unspecified]: 0.0534713 kg; lognormal variance with pedigree 0.0892, pedigree (2,5,2,4,4)
- Water [air, unspecified]: 0.0053067 m3; lognormal variance with pedigree 0.0892, pedigree (2,5,2,4,4)
- BOD5, Biological Oxygen Demand [water, unspecified]: 0.00810603 kg; lognormal variance with pedigree 0.0492, pedigree (2,5,2,2,2)
- COD, Chemical Oxygen Demand [water, unspecified]: 0.00810603 kg; lognormal variance with pedigree 0.0492, pedigree (2,5,2,2,2)
- Chloride [water, surface water]: 0.335326 kg; lognormal variance with pedigree 0.0492, pedigree (2,5,2,2,2)
- DOC, Dissolved Organic Carbon [water, unspecified]: 0.00284435 kg; lognormal variance with pedigree 0.0492, pedigree (2,5,2,2,2)
- Iodide [water, surface water]: 0.380117 kg; lognormal variance with pedigree 0.0492, pedigree (2,5,2,2,2)
- Potassium I [water, surface water]: 0.123252 kg; lognormal variance with pedigree 0.0492, pedigree (2,5,2,2,2)
- Sodium I [water, surface water]: 0.144976 kg; lognormal variance with pedigree 0.0492, pedigree (2,5,2,2,2)
- TOC, Total Organic Carbon [water, unspecified]: 0.00284435 kg; lognormal variance with pedigree 0.0492, pedigree (2,5,2,2,2)
- Water [water, unspecified]: 0.0545079 m3; lognormal variance with pedigree 0.0892, pedigree (2,5,2,4,4)

## Sampling procedure
Literature data and stoichiometric calculation. This inventory is partially based on a generic model of the production of chemicals. The data generated by this model have been improved with compound-specific data when available.
The model of the production of chemicals is using specific industry or literature data wherever possible and more generic data on chemical production processes to fill compound-specific data gaps when necessary. The basic principles of the model have been published in literature (Hischier, 2005). The model has been updated and extended with newly available data from the chemical industry.
In the model, unreacted fractions are treated in a waste treatment process, and emissions reported are after a waste treatment process that is included in the scope of this dataset. For volatile reactants, a small level of evaporation is assumed. Solvents and catalysts are mostly recycled in closed-loop systems within the scope of the dataset and reported flows are for losses from this system.
The main source of information for the values for heat, electricity, water (process and cooling), nitrogen, chemical factory is industry data from the GENDORF Chemical Park. The values are a 5-year average of data from 2015 to 2019 published by the GENDORF Chemical Park, which is based in Germany and produced an average of 2462760 tonnes of chemical substances in the years 2015-2019.

Reference(s):
Hischier, R. (2005) Establishing Life Cycle Inventories of Chemicals Based on Differing Data Availability (9 pp). The International Journal of Life Cycle Assessment, Volume 10, Issue 1, pp 59–67. 10.1065/lca2004.10.181.7
Chemiepark GENDORF, Umwelterklärung 2016, https://www.gendorf.de/Nachbarn/Umweltschutz/Industrie%20und%20Nachhaltigkeit
Chemiepark GENDORF, Umwelterklärung 2017, https://www.gendorf.de/Nachbarn/Umweltschutz/Industrie%20und%20Nachhaltigkeit
Chemiepark GENDORF, Umwelterklärung 2020, https://www.gendorf.de/Nachbarn/Umweltschutz/Industrie%20und%20Nachhaltigkeit
Unger T., (1996). Pesticide Synthesis Handbook, Noyes Publication.
Appleby A.P., Muller F., Carpy, S., (2011): Weed Control, in Ullmanns Encyclopedia of Industrial Chemistry, Weinheim, Wiley-VCH.
