# beet sugar production

Dataset: EcoSpold 2, unit process
Geography: RoW
Time period: 1998-01-01 to 2022-12-31
Technology level: current
Classification: ISIC rev.4 ecoinvent: 1072:Manufacture of sugar
Classification: EcoSpold01Categories: food industry/processing
Tags: ConvertedDataset
Scenario: Business-as-Usual
System model: Substitution, consequential, long-term
Share of production covered: 0 %
Generated by: Edgard Gnansounou
Published in: Jungbluth N. 2007
Database: ecoinvent
isCopyrightProtected: true
accessRestrictedTo: 1

## General comment
Inventory refers to the production of 1 kg sugar, respectively 1 kg of molasses (72% dry matter) and 1 kg of pulps (25.6% dry matter). The multioutput-process 'sugar beet, in sugar refinery' delivers the co-products 'sugar, from sugar beet, at sugar refinery' and 'molasses, from sugar beet, at sugar refinery' and 'pulps, from sugar beet, at sugar refinery. Economic allocation with allocation factor for common stages of 91.7% to sugar, 4.5% to molasses and 3.8% to pulps. Allocation is done according to carbon balance for CO2 emissions.
[This dataset was already contained in the ecoinvent database version 2. It was not individually updated during the transfer to ecoinvent version 3. Life Cycle Impact Assessment results may still have changed, as they are affected by changes in the supply chain, i.e. in other datasets. This dataset was generated following the ecoinvent quality guidelines for version 2. It may have been subject to central changes described in the ecoinvent version 3 change report (http://www.ecoinvent.org/database/ecoinvent-version-3/reports-of-changes/), and the results of the central updates were reviewed extensively. The changes added e.g. consistent water flows and other information throughout the database. The documentation of this dataset can be found in the ecoinvent reports of version 2, which are still available via the ecoinvent website. The change report linked above covers all central changes that were made during the conversion process.]

## Included activities end
This dataset includes the transport of sugar beets to the sugar refinery, and the processing of sugar beets to sugar, molasses (72% dry matter) and pulps (25.6% dry matter). System boundary is at the sugar refinery. Treatment of waste effluents is included. Packaging of the sugar is not included.

## Geography
Data is from sugar producer in CH, industrial data

## Technology
Sweet juice is extracted from the sugar beets by diffusion. The juice is then purified and crystallized to sugar. Molasses come as a by-product of the crystallization process.

## Time period
Data from 1998 to 2005, typical technology for the production of sugar from sugar beet

## Parameters
- fraction, process water, to air: 0.34 dimensionless; lognormal variance with pedigree 0.092025, pedigree (4,4,3,2,4)
- fraction, tap water, to air: 0.34 dimensionless; lognormal variance with pedigree 0.092025, pedigree (4,4,3,2,4)

## Reference product
- sugar, from sugar beet: 1 kg; By-product classification allocatable product; CPC 23512: Beet sugar
  production volume 3.9059e10 kg
  properties: EcoSpold01Allocation_undefined_1 100, EcoSpold01Allocation_undefined_10 91.97, EcoSpold01Allocation_undefined_11 95.34, EcoSpold01Allocation_undefined_12 95.34, EcoSpold01Allocation_undefined_13 95.34, EcoSpold01Allocation_undefined_14 95.34, EcoSpold01Allocation_undefined_15 95.34, EcoSpold01Allocation_undefined_16 95.34, EcoSpold01Allocation_undefined_17 95.34, EcoSpold01Allocation_undefined_18 92.63, EcoSpold01Allocation_undefined_19 88.24, EcoSpold01Allocation_undefined_2 100, EcoSpold01Allocation_undefined_20 93.79, EcoSpold01Allocation_undefined_3 0, EcoSpold01Allocation_undefined_4 91.75, EcoSpold01Allocation_undefined_5 91.75, EcoSpold01Allocation_undefined_6 91.75, EcoSpold01Allocation_undefined_7 93.7, EcoSpold01Allocation_undefined_8 90.07, EcoSpold01Allocation_undefined_9 90.07, carbon allocation 0.44 kg, carbon content 0.44, carbon content, fossil 0, carbon content, non-fossil 0.44, dry mass 1 kg, price 0.436 EUR2005, water content 0, water in wet mass 0 kg, wet mass 1 kg

## Inputs from technosphere
- chemical, inorganic: 0.000852045 kg; lognormal variance with pedigree 0.012, pedigree (1,1,5,5,1)
  properties: carbon content, fossil 0.003, dry mass 1 kg, wet mass 1 kg
- chemical, organic: 0.00059171 kg; lognormal variance with pedigree 0.012, pedigree (1,1,5,5,1)
  properties: carbon content, fossil 0.628, dry mass 1 kg, heating value, net 19.03 MJ, wet mass 1 kg
- coke: 0.0159997 MJ; lognormal variance with pedigree 0.012, pedigree (1,1,5,5,1)
  properties: carbon content, fossil 0.869149, dry mass 0.0328671 kg, heating value, net 28.6 MJ, water content 0.0638298, wet mass 0.034965 kg
- electricity, medium voltage: 0.0181419, 0.00335947, 0.000678783, 0.00862417, 0.0182559, 0.149683, 0.0125685, 0.000673665 kWh (8 suppliers, which the file names only by identifier); sum of these 0.211985 kWh; lognormal variance with pedigree 0.012, pedigree (1,1,5,5,1)
- heat, district or industrial, natural gas: 0.181895, 0.514344, 1.19875 MJ (3 suppliers, which the file names only by identifier); sum of these 1.89499 MJ; lognormal variance with pedigree 0.012, pedigree (1,1,5,5,1)
  properties: heating value, net 1 MJ
- lime: 0.185001 kg; lognormal variance with pedigree 0.012, pedigree (1,1,5,5,1)
  properties: carbon content, fossil 0.120005, dry mass 1 kg, wet mass 1 kg
- limestone residue: -0.233134 kg; lognormal variance with pedigree 0.012, pedigree (1,1,1,5,1)
  properties: carbon content, fossil 0.120005, dry mass 0.995 kg, water content 0.00502513, wet mass 1 kg
- molasses, from sugar beet: -0.228998 kg
  properties: EcoSpold01Allocation_undefined_11 4.658, EcoSpold01Allocation_undefined_12 4.658, EcoSpold01Allocation_undefined_13 4.658, EcoSpold01Allocation_undefined_14 4.658, EcoSpold01Allocation_undefined_15 4.658, EcoSpold01Allocation_undefined_16 4.658, EcoSpold01Allocation_undefined_17 4.658, EcoSpold01Allocation_undefined_18 4.525, EcoSpold01Allocation_undefined_20 4.582, EcoSpold01Allocation_undefined_21 100, EcoSpold01Allocation_undefined_3 29.2, EcoSpold01Allocation_undefined_7 4.578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
- soda ash, light: 0.00220116 kg; lognormal variance with pedigree 0.012, pedigree (1,1,5,5,1)
  properties: carbon content, fossil 0.0517241, dry mass 1 kg, heating value, net 3.43 MJ, wet mass 1 kg
- sugar beet: 6.37186 kg; lognormal variance with pedigree 0.012, pedigree (1,1,5,5,1)
  properties: carbon content, non-fossil 0.433043, dry mass 0.23 kg, water content 3.34783, wet mass 1 kg
- sugar beet pulp: -1.29999 kg
  properties: EcoSpold01Allocation_undefined_10 3.54, EcoSpold01Allocation_undefined_18 2.85, EcoSpold01Allocation_undefined_19 7.555, EcoSpold01Allocation_undefined_22 100, EcoSpold01Allocation_undefined_3 70.8, EcoSpold01Allocation_undefined_4 3.773, EcoSpold01Allocation_undefined_5 3.773, EcoSpold01Allocation_undefined_6 3.773, EcoSpold01Allocation_undefined_7 1.718, EcoSpold01Allocation_undefined_8 5.597, EcoSpold01Allocation_undefined_9 5.597, water content 3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
- sugar refinery: 1e-10 unit; lognormal variance with pedigree 0.312, pedigree (1,1,5,5,1)
- sulfuric acid: 0.000402364 kg; lognormal variance with pedigree 0.012, pedigree (1,1,5,5,1)
  properties: dry mass 1 kg, wet mass 1 kg
- tap water: 0.280331, 0.843684, 0.0985524, 0.75519, 0.150235, 1.08829, 0.00252677, 3.78833 kg (8 suppliers, which the file names only by identifier); sum of these 7.00714 kg; lognormal variance with pedigree 0.012, pedigree (1,1,5,5,1)
  properties: carbon content, fossil 0.00178991, dry mass 0.000337476 kg, water content 2962.17, wet mass 1 kg
- transport, tractor and trailer, agricultural: 0.0637186 metric ton*km; lognormal variance with pedigree 0.132, pedigree (1,1,5,5,1)
- wastewater, average: -0.00213512, -0.00892905, -3.17908e-5 m3 (3 suppliers, which the file names only by identifier); sum of these -0.011096 m3; lognormal variance with pedigree 0.012, pedigree (1,1,1,5,1)
  properties: carbon content, non-fossil 0.194039, dry mass 0.346837 kg, mass concentration, TOC 0.1091 kg/m3, mass concentration, calcium 0.039453 kg/m3, mass concentration, chlorine 0.030031 kg/m3, mass concentration, hydrogen 0.013365 kg/m3, mass concentration, nitrogen 0.031015 kg/m3, mass concentration, oxygen 0.069824 kg/m3, mass concentration, sodium 0.06456 kg/m3, mass concentration, sulfur 0.015602 kg/m3, water content 2882.2, wet mass 1000 kg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

## Inputs from nature
- Carbon dioxide, in air [natural resource, in air]: 0.415235 kg; lognormal variance with pedigree 0.002, pedigree (1,1,5,5,1)

## Emissions to nature
- Carbon dioxide, non-fossil [air, urban air close to ground]: 0.420473 kg; lognormal variance with pedigree 0.002, pedigree (1,1,5,5,1)
- Water [air, unspecified]: 0.00238244 m3; lognormal variance with pedigree 0.0427, pedigree (2,2,5,5,1)

## Extrapolations
none This dataset has been copied from an original dataset covering the geography CH. The uncertainty has been adjusted accordingly.

## Review by Niels Jungbluth 2006-08-15
Passed.
none
