# unreinforced concrete production, 15MPa, with cement, CEM II/A

Dataset: EcoSpold 2, unit process
Geography: CH
Time period: 2013-01-01 to 2022-12-31
Technology level: current
Classification: ISIC rev.4 ecoinvent: 2395:Manufacture of articles of concrete, cement and plaster
Classification: EcoSpold01Categories: construction materials/concrete
Synonyms: béton non armé; ready-mixed concrete; unbewehrter Beton; Transportbeton
Scenario: Business-as-Usual
System model: Substitution, consequential, long-term
Generated by: Frank Werner
Published in: Werner F. 2014
Database: ecoinvent
isCopyrightProtected: true
accessRestrictedTo: 1

## General comment
This dataset contains the production of unreinforced concrete with cement CEM II/A from primary aggregates (no input of recycled gravel or sand). This concrete does not contain any reinforcement steel or other metals. It can be used in all exposition classes, except for applications with exposure to frost with or without deicing agents, to abrasion or to chemicals; for concrete with reinforcement, the application shall be very dry, e.g. in buildings with very low humidity.
Density: 2370 kg/m3, content of cement: 200 kg/m3
Exposition class according to EN 206-1: X0
Examples for this exposition class are unreinforced foundations without frost, unreinforced construction elements for indoor use.

## Included activities start
The activity starts with the ingredients for the concrete at the factory gate.

## Included activities end
Includes the whole manufacturing processes to produce ready-mixed concrete, internal processes (transport, etc.) and infrastructure. No administration is included.

## Geography
For some exchanges RER-modules have been used as proxy

## Technology
Typical technology for average Swiss production

## Parameters
- fraction, process water, to air: 0.15 dimensionless; name fraction_PW_to_air; lognormal variance with pedigree 0.092025, pedigree (4,4,3,2,4)
  Literature value. In case when no industry/process specific data are available, default evaporation fraction value is used. This value is 15% and is based on literature (Statistics Canada, 2007 & Shaffer, K.H., 2008, Consumptive water use in the Great Lakes Basin, USGS & Shiklomanov, 2003, World Water Resources at the Beginning of the 21st Century) and has been approved by an expert.
- fraction, tap water, to air: 0.15 dimensionless; name fraction_TW_to_air; = fraction_PW_to_air; lognormal variance with pedigree 0.092025, pedigree (4,4,3,2,4)
  Calculated value. See comment in the other parametres present in this dataset. Tap water is considered to be always used as process water, thus process water fractions to air are applied to all tap water input flows to calculate the amount of water consumed in the processes.
- fraction, water, completely softened, to air: 0.15 dimensionless; name fraction_WCS_to_air; = fraction_PW_to_air; lognormal variance with pedigree 0.092025, pedigree (4,4,3,2,4)
  Calculated value. See comment in the other parametres present in this dataset. Water, completely softened is considered to be always used as process water, thus process water fractions to air are applied to all water, completely softened input flows to calculate the amount of water consumed in the processes.

## Reference product
- unreinforced concrete, 15MPa: 1 m3; By-product classification allocatable product; CPC 37540: Tiles, flagstones, bricks and similar articles, of cement, concrete or artificial stone; EcoSpold01Categories construction materials/concrete
  production volume 105000 m3
  properties: carbon allocation 0 kg, carbon content 0, carbon content, fossil 0, carbon content, non-fossil 0, dry mass 2190 kg, price 185 EUR2005, water content 0.0776256, water in wet mass 170 kg, wet mass 2360 kg

## Inputs from technosphere
- cement, CEM II/A: 200 kg; lognormal variance with pedigree 0.014, pedigree (4,1,5,1,1)
  properties: dry mass 1 kg, wet mass 1 kg
- concrete mixing factory: 4.17e-7 unit; lognormal variance with pedigree 0.3206, pedigree (2,1,4,1,1)
- diesel, burned in building machine: 0.2 MJ; lognormal variance with pedigree 0.010625, pedigree (2,1,4,2,1)
  properties: heating value, net 1 MJ
- electricity, medium voltage: 5.4 kWh; lognormal variance with pedigree 0.0106, pedigree (2,1,4,1,1)
- gravel, round: 1280 kg; lognormal variance with pedigree 0.0181, pedigree (4,2,4,1,1)
  properties: dry mass 1 kg, wet mass 1 kg
- heat, district or industrial, natural gas: 2.6 MJ; lognormal variance with pedigree 0.024025, pedigree (3,4,4,2,1)
  properties: heating value, net 1 MJ
- heat, district or industrial, other than natural gas: 2.4 MJ; lognormal variance with pedigree 0.024025, pedigree (3,4,4,2,1)
  properties: heating value, net 1 MJ
- lubricating oil: 0.02 kg; lognormal variance with pedigree 0.010625, pedigree (2,1,4,2,1)
  properties: carbon content, fossil 0.75, dry mass 1 kg, heating value, net 40.2 MJ, wet mass 1 kg
- municipal solid waste: -0.05 kg; lognormal variance with pedigree 0.0106, pedigree (2,1,1,1,1)
  properties: carbon content, fossil 0.171549, carbon content, non-fossil 0.261655, dry mass 0.771 kg, heating value, net 11.74 MJ, water content 0.297017, wet mass 1 kg
- sand: 720 kg; lognormal variance with pedigree 0.014, pedigree (4,1,5,1,1)
  properties: dry mass 1 kg, wet mass 1 kg
- synthetic rubber: 0.12 kg; lognormal variance with pedigree 0.010625, pedigree (2,1,4,2,1)
  properties: carbon content, fossil 0.871949, dry mass 1 kg, heating value, net 26.42 MJ, wet mass 1 kg
- tap water: 170 kg; lognormal variance with pedigree 0.012825, pedigree (3,3,5,2,1)
  properties: carbon content, fossil 0.00178991, dry mass 0.000337476 kg, water content 2962.17, wet mass 1 kg
- waste concrete: -5.29 kg; lognormal variance with pedigree 0.0106, pedigree (2,1,1,1,1)
  properties: dry mass 0.5 kg, water content 1, wet mass 1 kg

## Sampling procedure
Measured data of several Swiss plants, intended to be representative for the Swiss production volume

## Extrapolations
See geography
