# vegetable oil esterification facility construction

Dataset: EcoSpold 2, unit process
Geography: RoW
Time period: 2004-01-01 to 2022-12-31
Technology level: current
Classification: EcoSpold01Categories: biomass/fuels
Classification: ISIC rev.4 ecoinvent: 4290:Construction of other civil engineering projects
Tags: ConvertedDataset
Scenario: Business-as-Usual
System model: Substitution, consequential, long-term
Share of production covered: 0 %
Generated by: Edgard Gnansounou
Published in: Jungbluth N. 2007
Database: ecoinvent
isCopyrightProtected: true
accessRestrictedTo: 1

## General comment
Esterification plant with a daily production of 63 t methyl ester. Life time of plant taken as 50 years.
[This dataset was already contained in the ecoinvent database version 2. It was not individually updated during the transfer to ecoinvent version 3. Life Cycle Impact Assessment results may still have changed, as they are affected by changes in the supply chain, i.e. in other datasets. This dataset was generated following the ecoinvent quality guidelines for version 2. It may have been subject to central changes described in the ecoinvent version 3 change report (http://www.ecoinvent.org/database/ecoinvent-version-3/reports-of-changes/), and the results of the central updates were reviewed extensively. The changes added e.g. consistent water flows and other information throughout the database. The documentation of this dataset can be found in the ecoinvent reports of version 2, which are still available via the ecoinvent website. The change report linked above covers all central changes that were made during the conversion process.]

## Included activities end
This process includes land use and occupation, buildings and facilities of a typical industrial vegetable oil esterification plant in the Swiss context. Energy use for construction and related emissions and/or waste effluents are not included.

## Geography
Data from biodiesel producer in CH, adapted to the plant size considered.

## Technology
Typical vegetable oil esterification plant designed for methyl ester production (for use in the vehicle fuels market) adapted to Swiss conditions and context, CH, vegetable oil base-catalyzed transesterification facility.

## Reference product
- vegetable oil esterification facility: 1 unit; By-product classification allocatable product; CPC 53269: Other constructions for manufacturing
  production volume 3.00451 unit
  properties: carbon allocation 0 kg, carbon content 0, price 829554 EUR2005

## Inputs from technosphere
- building, hall: 500 m2; lognormal variance with pedigree 0.392, pedigree (3,5,5,5,4)
- building, hall, steel construction: 4130 m2; lognormal variance with pedigree 0.392, pedigree (3,5,5,5,4)
- steel, low-alloyed, hot rolled: 492000 kg; lognormal variance with pedigree 0.092, pedigree (3,5,5,5,4)
  properties: carbon content, fossil 0.005, dry mass 1 kg, wet mass 1 kg

## Inputs from nature
- Occupation, construction site [natural resource, land]: 18520 m2*year; lognormal variance with pedigree 0.132, pedigree (3,5,5,5,4)
- Occupation, industrial area [natural resource, land]: 694500 m2*year; lognormal variance with pedigree 0.132, pedigree (3,5,5,5,4)
- Transformation, from unspecified [natural resource, land]: 9260 m2; lognormal variance with pedigree 0.212, pedigree (3,5,5,5,4)
- Transformation, to industrial area [natural resource, land]: 9260 m2; lognormal variance with pedigree 0.212, pedigree (3,5,5,5,4)

## Sampling procedure
Adapted to reference capacity with data from one plant in CH

## Extrapolations
none This dataset has been copied from an original dataset covering the geography CH. The uncertainty has been adjusted accordingly.

## Review by Niels Jungbluth 2006-07-12
Passed.
none
