# helicopter production

Dataset: EcoSpold 2, unit process
Geography: GLO
Time period: 2000-01-01 to 2022-12-31
Technology level: current
Classification: EcoSpold01Categories: transport systems/airplane
Classification: ISIC rev.4 ecoinvent: 3030:Manufacture of air and spacecraft and related machinery
Synonyms: Hubschrauber
Tags: ConvertedDataset
Scenario: Business-as-Usual
System model: Substitution, consequential, long-term
Generated by: Mireille Faist Emmenegger (obsolete)
Published in: Faist Emmenegger, M. 2007
Database: ecoinvent
isCopyrightProtected: true
accessRestrictedTo: 1

## General comment
10'000 hours flight time during life.
[This dataset was already contained in the ecoinvent database version 2. It was not individually updated during the transfer to ecoinvent version 3. Life Cycle Impact Assessment results may still have changed, as they are affected by changes in the supply chain, i.e. in other datasets. This dataset was generated following the ecoinvent quality guidelines for version 2. It may have been subject to central changes described in the ecoinvent version 3 change report (http://www.ecoinvent.org/database/ecoinvent-version-3/reports-of-changes/), and the results of the central updates were reviewed extensively. The changes added e.g. consistent water flows and other information throughout the database. The documentation of this dataset can be found in the ecoinvent reports of version 2, which are still available via the ecoinvent website. The change report linked above covers all central changes that were made during the conversion process.]

## Included activities end
This dataset describes the material required for a helicopter.

## Geography
Estimations

## Technology
Estimations for a standard helicopter.

## Reference product
- helicopter: 1 unit; By-product classification allocatable product; CPC 49621: Helicopters
  production volume 1 unit
  properties: carbon allocation 0 kg, carbon content 0, price 293641 EUR2005

## Inputs from technosphere
- aluminium, wrought alloy: 500 kg; lognormal variance with pedigree 0.0901, pedigree (5,4,5,3,3)
  properties: dry mass 1 kg, wet mass 1 kg
- reinforcing steel: 500 kg; lognormal variance with pedigree 0.0901, pedigree (5,4,5,3,3)
  properties: carbon content, fossil 0.004, dry mass 1 kg, wet mass 1 kg

## Review by Michael Spielmann (obsolete) 2003-07-08
passed.
