# recultivation, limestone mine

Dataset: EcoSpold 2, unit process
Geography: CH
Time period: 2000-01-01 to 2022-12-31
Technology level: current
Classification: ISIC rev.4 ecoinvent: 3900:Remediation activities and other waste management services
Classification: EcoSpold01Categories: construction materials/additives
Tags: ConvertedDataset
Scenario: Business-as-Usual
System model: Substitution, consequential, long-term
Generated by: Daniel Kellenberger (obsolete)
Published in: Kellenberger D. 2007
Database: ecoinvent
isCopyrightProtected: true
accessRestrictedTo: 1

## General comment
This dataset represents the recultivation of 1 m2 of topsoil after limestone extraction. An assumed average thickness of about 0.3 m and a density of 1400 kg/m3 are assumed. The weight of topsoil per m2 is therefore about 420 kg. The ratio of topsoil to extracted limestone is 0.26% (density: 2'300 kg/m3, thickness: 70m, weight: 160'000 kg/m2).
[This dataset was already contained in the ecoinvent database version 2. It was not individually updated during the transfer to ecoinvent version 3. Life Cycle Impact Assessment results may still have changed, as they are affected by changes in the supply chain, i.e. in other datasets. This dataset was generated following the ecoinvent quality guidelines for version 2. It may have been subject to central changes described in the ecoinvent version 3 change report (http://www.ecoinvent.org/database/ecoinvent-version-3/reports-of-changes/), and the results of the central updates were reviewed extensively. The changes added e.g. consistent water flows and other information throughout the database. The documentation of this dataset can be found in the ecoinvent reports of version 2, which are still available via the ecoinvent website. The change report linked above covers all central changes that were made during the conversion process.]

## Included activities start
Recultivation process starting from the end of an excavation activity.

## Included activities end
The activity ends with the area recultivated. The dataset includes only the transformation from a mineral extraction site to a forest and the diesel consumption.

## Geography
Data was obtained from Swiss industries.

## Technology
The data corresponds to the high level of technology.

## Reference product
- recultivation, limestone mine: 1 m2; By-product classification allocatable product; CPC 9441: Site remediation and clean-up services
  production volume 0.0336675 m2
  properties: carbon allocation 0 kg, carbon content 0, price 0.139872 EUR2005

## Inputs from technosphere
- diesel, burned in building machine: 7.44 MJ; lognormal variance with pedigree 0.3286, pedigree (4,3,5,1,1)
  properties: heating value, net 1 MJ

## Inputs from nature
- Transformation, from mineral extraction site [natural resource, land]: 1 m2; lognormal variance with pedigree 0.1221, pedigree (3,2,5,1,1)
- Transformation, to forest, unspecified [natural resource, land]: 1 m2; lognormal variance with pedigree 0.1221, pedigree (3,2,5,1,1)

## Sampling procedure
Data is based on a Swiss company.

## Review by Roberto Dones 2003-07-04
Passed

## Review by Roland Hischier 2011-09-22
Transfer of documentation done.
