# electricity production, deep geothermal

Dataset: EcoSpold 2, unit process
Geography: FR
Time period: 2016-01-01 to 2022-12-31
Technology level: modern
Classification: ISIC rev.4 ecoinvent: 3510:Electric power generation, transmission and distribution
Tags: marginal; consequential system model only; geothermal power
Scenario: Business-as-Usual
System model: Substitution, consequential, long-term
Generated by: Christian Bauer
Published in: S Hirchberg, S Wiemer, P Burgherr 2015
Database: ecoinvent
isCopyrightProtected: true
accessRestrictedTo: 1

## General comment
Currently, this technology is not used for electricity generation in this country, annual production volume zero. However, this technology is supposed to contribute to capactiy expansion/replacement between today and 2030. This dataset represents electricity production with a deep geothermal enhanced geothermal systems plant. The power generation unit is run on an Organic Rankine Cycle with Benzene as working fluid.
Detailed information on this dataset is presented in the book "Energy from the Earth. 2015. Hirschberg, Wiemer, Burgherr (eds.) (see field "Data Generator and Publication").

## Included activities start
This dataset starts from commissioned geothermal power plants ready to generate electricity.

## Included activities end
This activity ends with the high voltage electricity produced at the power plant.

## Geography
Represents installation of a deep geothermal power plant in Switzerland. Used as first approximation for GLO. Uncertainties adjusted accordingly.

## Time period
Current annual production volume is zero. However, this technology is supposed to contribute to capacitiy expansion/replacement between today and 2030.

## Reference product
- electricity, high voltage: 1 kWh; By-product classification allocatable product; CPC 17100: Electrical energy
  production volume 1.49148e9 kWh
  properties: carbon allocation 0 kg, carbon content 0, price 0.0977 EUR2005

## Inputs from technosphere
- benzene: 3.05e-6 kg; lognormal variance with pedigree 0.1, pedigree (2,2,3,5,2)
  properties: carbon content, fossil 0.923077, dry mass 1 kg, heating value, net 42.5 MJ, wet mass 1 kg
- geothermal power plant, 5.5MWel: 5.77701e-10 unit; lognormal variance with pedigree 0.1, pedigree (2,2,3,5,2)

## Inputs from nature
- Energy, geothermal, converted [natural resource, in ground]: 7.14286 MJ; lognormal variance with pedigree 0.2106, pedigree (5,5,5,5,5)

## Emissions to nature
- Benzene [air, unspecified]: 3.05e-6 kg; lognormal variance with pedigree 0.1, pedigree (2,2,3,5,2)

## Sampling procedure
Literature

## Extrapolations
Extrapolated from CH conditions.
