# sodium ethyl xanthate production

Dataset: EcoSpold 2, unit process
Geography: ZA
Time period: 2014-01-01 to 2024-12-31
Technology level: current
Classification: EcoSpold01Categories: chemicals/organics
Classification: ISIC rev.4 ecoinvent: 2011:Manufacture of basic chemicals
Scenario: Business-as-Usual
System model: Substitution, consequential, long-term
Generated by: Daria Dellenbach
Published in: Makhosazane Chucky Kunene 2014
Database: ecoinvent
isCopyrightProtected: true
accessRestrictedTo: 1

## General comment
This dataset represents the production of 1 kg pure sodium ethyl xanthate (CAS 140-90-9) from carbon disulfide. Sodium ethyl xanthate is a pale yellow powder at standard conditions.
Sodium ethyl xanthate is used mainly in the mining industry as flotation agent for recovery of metals as copper, nickel, silver or gold, as well as solid metal sulfides or oxides from ore slurries. Furthermore, it is used as defoliant, herbicide, and an additive to rubber to protect it against oxygen and ozone.
Sodium ethyl xanthate showed a moderat toxicity through oral and dermal intake in animals and is irritating to eyes and skin. It is especially toxic to aquatic life and therefore its disposal is strictly controlled.
Sodium ethyl xanthate is produced from carbon disulfide, ethanol and sodium hydroxide:
CH3CH2OH + CS2 + NaOH --> CH3CH2OCS2Na + H2O
References:
Kunene, M. C. (2014): Life cycle assessment of the production of xanthate salts and of their application for ARD mitigation, University of Cape Town
GENDORF Chemical Park

## Included activities start
The activity includes all the raw and processed materials necessary to produce this product.

## Included activities end
The activity ends with the final product being ready for transportation at the production site.

## Geography
South African data, collected monthly average in 2011, average data.

## Technology
Sodium ethyl xanthate is produced from carbon disulfide, ethanol and sodium hydroxide. The production is essentially carried out in a batch system.
CH3CH2OH + CS2 + NaOH --> CH3CH2OCS2Na + H2O
The process is usually carried out in two steps:
1. CH3CH2OH + NaOH --> CH3CH2ONa + H2O
Excess of precooled alcohol is added to the reactor and sodium hydroxide is added slowly. Since the reaction is exothermic, is has to be cooled continously by cooling water.
2. CH3CH2ONa + CS2 --> CH2CH2OCS2Na
Carbon disulfide is added under continued refrigeration.
Emissions from the xanthate plant are reported to be negligible as neither the solid nor the liquid plants generate solid or liquid effluents. All non-product outputs are returned to the process for conversion to xanthate.
Reference:
Kunene, M. C. (2014): Life cycle assessment of the production of xanthate salts and of their application for ARD mitigation, University of Cape Town
GENDORF Chemical Park

## Time period
time to which data refer

## Reference product
- sodium ethyl xanthate: 1 kg; By-product classification allocatable product; CPC 3416: Organo-sulphur compounds and other organo-inorganic compounds; heterocyclic compounds n.e.c.; nucleic acids and[…]
  production volume 146429 kg
  properties: carbon allocation 0.249914 kg, carbon content 0.249914, carbon content, fossil 0.249914, carbon content, non-fossil 0, dry mass 1 kg, heating value, net 11.775 MJ, price 1.03713 EUR2005, water content 0, water in wet mass 0 kg, wet mass 1 kg

## Inputs from technosphere
- carbon disulfide: 0.53 kg; lognormal variance with pedigree 0.01003, pedigree (2,3,2,2,3)
  properties: carbon content, fossil 0.157895, dry mass 1 kg, heating value, net 32.72 MJ, wet mass 1 kg
- chemical factory, organics: 4e-10 unit; lognormal variance with pedigree 0.3432, pedigree (2,4,1,4,4)
- electricity, medium voltage: 0.164 kWh; lognormal variance with pedigree 0.01003, pedigree (2,3,2,2,3)
- ethanol, without water, in 99.7% solution state, from ethylene: 0.32 kg; lognormal variance with pedigree 0.01003, pedigree (2,3,2,2,3)
  properties: carbon content, fossil 0.521739, dry mass 1 kg, heating value, net 31.58 MJ, wet mass 1 kg
- hazardous waste, for incineration: -0.13 kg; lognormal variance with pedigree 0.0458, pedigree (3,3,3,4,4)
  properties: carbon content, fossil 0.554667, dry mass 0.75 kg, heating value, net 17 MJ, water content 0.333333, wet mass 1 kg
- nitrogen, liquid: 0.02563 kg; lognormal variance with pedigree 0.01003, pedigree (2,3,2,2,3)
  properties: dry mass 1 kg, wet mass 1 kg
- sodium hydroxide, without water, in 50% solution state: 0.28 kg; lognormal variance with pedigree 0.01003, pedigree (2,3,2,2,3)
  properties: dry mass 1 kg, heating value, net 3.03 MJ, wet mass 1 kg
- wastewater, unpolluted: -2.18e-7 m3; lognormal variance with pedigree 0.0438, pedigree (2,4,1,4,4)
  properties: carbon content, fossil 0.00178991, carbon content, non-fossil 0.00178991, dry mass 0.337476 kg, water content 2962.17, wet mass 1000 kg
- water, deionised: 0.316 kg; lognormal variance with pedigree 0.01003, pedigree (2,3,2,2,3)
  properties: wet mass 1 kg

## Inputs from nature
- Water, cooling, unspecified natural origin [natural resource, in water]: 0.001264 m3; lognormal variance with pedigree 0.01003, pedigree (2,3,2,2,3)

## Emissions to nature
- Nitrogen [air, unspecified]: 0.02563 kg; lognormal variance with pedigree 0.002625, pedigree (2,3,2,2,2)
- Water [air, unspecified]: 0.000140659 m3; lognormal variance with pedigree 0.0495, pedigree (2,3,2,3,3)
- Water [water, unspecified]: 0.00143912 m3; lognormal variance with pedigree 0.0495, pedigree (2,3,2,3,3)

## Sampling procedure
literature values, collected monthly average in 2011, average data.

## Extrapolations
no extrapolation
