# neodymium oxide to generic market for mischmetal

Dataset: EcoSpold 2, unit process
Geography: GLO
Time period: 2011-01-01 to 2022-12-31
Technology level: current
Classification: EcoSpold01Categories: chemicals/inorganics
Classification: ISIC rev.4 ecoinvent: 0729:Mining of other non-ferrous metal ores
Scenario: Business-as-Usual
System model: Substitution, consequential, long-term
Generated by: Bo Weidema
Database: ecoinvent
isCopyrightProtected: true
accessRestrictedTo: 1

## General comment
This dataset provides an outlet for surplus neodymium oxide from co-production with other rare earth oxides. This dataset implies an assumption that a surplus will add to the neodymium content of the general mischmetal (mixed rare earths). This route should be replaced by a dataset representing the marginal application of neodymium, as soon as this becomes available.

## Included activities start
This linking activity starts from the supply of surplus neodymium

## Included activities end
ends with the supply of mischmetal

## Technology
This is a linking activity between two markets, without any other activity. It has no other inputs and outputs.

## Reference product
- mischmetal: 1 kg; By-product classification allocatable product; CPC 34290: Compounds of rare earth metals, of yttrium or of scandium
  production volume 1.24135e6 kg
  properties: carbon allocation 0 kg, carbon content 0, carbon content, fossil 0, carbon content, non-fossil 0, dry mass 1 kg, price 619.06 EUR2005, water content 0, water in wet mass 0 kg, wet mass 1 kg

## Inputs from technosphere
- neodymium oxide: 1 kg
  properties: dry mass 1 kg, wet mass 1 kg
