# photovoltaic panel production, multi-Si wafer

Dataset: EcoSpold 2, unit process
Geography: RER
Time period: 2005-01-01 to 2022-12-31
Technology level: current
Classification: EcoSpold01Categories: photovoltaic/production of components
Classification: ISIC rev.4 ecoinvent: 2610:Manufacture of electronic components and boards
Synonyms: PV-module; silicon; multi-crystalline; Solarmodul; polycrystalline
Tags: ConvertedDataset
Scenario: Business-as-Usual
System model: Substitution, consequential, long-term
Share of production covered: 5 %
Generated by: Niels Jungbluth
Published in: Jungbluth, N. 2007
Database: ecoinvent
isCopyrightProtected: true
accessRestrictedTo: 1

## General comment
Unit process raw data for 1 m2 of PV panel. Investigated for the production of solar panels and laminates with 60 solar cells a 156*156cm2 with a capacity of 210Wp. Cell size and amount and capacity might differ between different producers.
[This dataset was already contained in the ecoinvent database version 2. It was not individually updated during the transfer to ecoinvent version 3. Life Cycle Impact Assessment results may still have changed, as they are affected by changes in the supply chain, i.e. in other datasets. This dataset was generated following the ecoinvent quality guidelines for version 2. It may have been subject to central changes described in the ecoinvent version 3 change report (http://www.ecoinvent.org/database/ecoinvent-version-3/reports-of-changes/), and the results of the central updates were reviewed extensively. The changes added e.g. consistent water flows and other information throughout the database. The documentation of this dataset can be found in the ecoinvent reports of version 2, which are still available via the ecoinvent website. The change report linked above covers all central changes that were made during the conversion process.]

## Included activities end
Production of the cell matrix, cutting of foils and washing of glass, production of laminate, isolation. Aluminium frame of the panel. Disposal after end of life. Data for direct air and water emissions were not available. It can be expected that small amount of NMVOC will be emitted from the lamination process.

## Geography
Production plants in Western Europe.

## Technology
Modern production plant.

## Time period
Date of data investigation. Some older data from 2001.

## Parameters
- fraction, process water, to air: 0.15 dimensionless; name fraction_PW_to_air; lognormal variance with pedigree 0.092025, pedigree (4,4,3,2,4)
  Literature value. In case when no industry/process specific data are available, default evaporation fraction value is used. This value is 15% and is based on literature (Statistics Canada, 2007 & Shaffer, K.H., 2008, Consumptive water use in the Great Lakes Basin, USGS & Shiklomanov, 2003, World Water Resources at the Beginning of the 21st Century) and has been approved by an expert.
- fraction, tap water, to air: 0.15 dimensionless; name fraction_TW_to_air; = fraction_PW_to_air; lognormal variance with pedigree 0.092025, pedigree (4,4,3,2,4)
  Calculated value. See comment in the other parametres present in this dataset. Tap water is considered to be always used as process water, thus process water fractions to air are applied to all tap water input flows to calculate the amount of water consumed in the processes.

## Reference product
- photovoltaic panel, multi-Si wafer: 1 m2; By-product classification allocatable product; CPC 47150: Diodes, transistors and similar semi-conductor devices; photosensitive semi-conductor devices; light emitting […]
  production volume 3.25407e6 m2
  properties: carbon allocation 0 kg, carbon content 0, price 488 EUR2005

## Inputs from technosphere
- 1-propanol: 0.0081386 kg; lognormal variance with pedigree 0.0021, pedigree (1,4,5,3,1)
  properties: carbon content, fossil 0.6, dry mass 1 kg, heating value, net 34.3 MJ, wet mass 1 kg
- acetone, liquid: 0.012959 kg; lognormal variance with pedigree 0.0021, pedigree (1,4,5,3,1)
  properties: carbon content, fossil 0.62069, dry mass 1 kg, heating value, net 31.32 MJ, wet mass 1 kg
- aluminium alloy, AlMg3: 2.6294 kg; lognormal variance with pedigree 0.0021, pedigree (1,4,5,3,1)
  properties: dry mass 1 kg, wet mass 1 kg
- brazing solder, cadmium free: 0.0087647 kg; lognormal variance with pedigree 0.0021, pedigree (1,4,5,3,1)
  properties: dry mass 1 kg, wet mass 1 kg
- copper, cathode: 0.11269 kg; lognormal variance with pedigree 0.0021, pedigree (1,4,5,3,1)
  properties: dry mass 1 kg, wet mass 1 kg
- corrugated board box: 1.0956 kg; lognormal variance with pedigree 0.0021, pedigree (1,4,5,3,1)
  properties: carbon content, fossil 0.000656085, carbon content, non-fossil 0.432275, dry mass 0.945 kg, heating value, net 12.86 MJ, water content 0.0582011, wet mass 1 kg
- electricity, medium voltage: 4.7107 kWh; lognormal variance with pedigree 0.0026, pedigree (3,3,5,1,1)
- ethylvinylacetate, foil: 1.0017 kg; lognormal variance with pedigree 0.0021, pedigree (1,4,5,3,1)
  properties: carbon content, fossil 0.79734, dry mass 1 kg, heating value, net 35.99 MJ, wet mass 1 kg
- glass fibre reinforced plastic, polyamide, injection moulded: 0.18781 kg; lognormal variance with pedigree 0.0021, pedigree (1,4,5,3,1)
  properties: carbon content, fossil 0.446018, dry mass 1 kg, wet mass 1 kg
- heat, district or industrial, natural gas: 4.86639 MJ; lognormal variance with pedigree 0.0026, pedigree (3,3,5,1,1)
  properties: heating value, net 1 MJ
- lubricating oil: 0.0016069 kg; lognormal variance with pedigree 0.0021, pedigree (1,4,5,3,1)
  properties: carbon content, fossil 0.75, dry mass 1 kg, heating value, net 40.2 MJ, wet mass 1 kg
- methanol: 0.0021556 kg; lognormal variance with pedigree 0.0021, pedigree (1,4,5,3,1)
  properties: carbon content, fossil 0.375, dry mass 1 kg, heating value, net 20 MJ, wet mass 1 kg
- municipal solid waste: -0.03 kg; lognormal variance with pedigree 0.0021, pedigree (1,4,1,3,1)
  properties: carbon content, fossil 0.171549, carbon content, non-fossil 0.261655, dry mass 0.771 kg, heating value, net 11.74 MJ, water content 0.297017, wet mass 1 kg
- nickel, class 1: 0.00016277 kg; lognormal variance with pedigree 0.0021, pedigree (1,4,5,3,1)
  properties: dry mass 1 kg, wet mass 1 kg
- photovoltaic cell, multi-Si wafer: 0.93241 m2; lognormal variance with pedigree 0.0021, pedigree (1,4,5,3,1)
  properties: carbon content, fossil 0.0139333, dry mass 0.68 kg, wet mass 0.68 kg
- photovoltaic panel factory: 4e-6 unit; lognormal variance with pedigree 0.3021, pedigree (1,4,5,3,1)
- polyethylene terephthalate, granulate, amorphous: 0.37297 kg; lognormal variance with pedigree 0.0021, pedigree (1,4,5,3,1)
  properties: carbon content, fossil 0.625, dry mass 1 kg, heating value, net 22.95 MJ, wet mass 1 kg
- polyvinylfluoride, film: 0.1104 kg; lognormal variance with pedigree 0.0021, pedigree (1,4,5,3,1)
  properties: carbon content, fossil 0.521739, dry mass 1 kg, heating value, net 23.7 MJ, wet mass 1 kg
- silicone product: 0.12195 kg; lognormal variance with pedigree 0.0021, pedigree (1,4,5,3,1)
  properties: carbon content, fossil 0.324324, dry mass 1 kg, heating value, net 9.83 MJ, wet mass 1 kg
- solar glass, low-iron: 10.079 kg; lognormal variance with pedigree 0.0201, pedigree (1,4,5,3,3)
  properties: dry mass 1 kg, wet mass 1 kg
- tap water: 21.286 kg; lognormal variance with pedigree 0.0021, pedigree (1,4,5,3,1)
  properties: carbon content, fossil 0.00178991, dry mass 0.000337476 kg, water content 2962.17, wet mass 1 kg
- tempering, flat glass: 10.079 kg; lognormal variance with pedigree 0.0021, pedigree (1,4,5,3,1)
- vinyl acetate: 0.0016434 kg; lognormal variance with pedigree 0.0021, pedigree (1,4,5,3,1)
  properties: carbon content, fossil 0.55814, dry mass 1 kg, heating value, net 25.35 MJ, wet mass 1 kg
- waste mineral oil: -3.88194e-5, -0.00156808 kg (2 suppliers, which the file names only by identifier); sum of these -0.0016069 kg; lognormal variance with pedigree 0.0021, pedigree (1,4,1,3,1)
  properties: carbon content, fossil 0.864444, dry mass 0.9 kg, heating value, net 34.7 MJ, water content 0.111111, wet mass 1 kg
- waste plastic, mixture: -1.6861 kg; lognormal variance with pedigree 0.0021, pedigree (1,4,1,3,1)
  properties: carbon content, fossil 0.747344, dry mass 0.847 kg, heating value, net 30.79 MJ, water content 0.180638, wet mass 1 kg
- waste polyvinylfluoride: -0.1104 kg; lognormal variance with pedigree 0.0021, pedigree (1,4,1,3,1)
  properties: carbon content, fossil 0.571142, dry mass 0.998 kg, heating value, net 27.89 MJ, water content 0.00200401, wet mass 1 kg
- wastewater, average: -0.0207642, -0.000521834 m3 (2 suppliers, which the file names only by identifier); sum of these -0.021286 m3; lognormal variance with pedigree 0.0021, pedigree (1,4,1,3,1)
  properties: carbon content, non-fossil 0.194039, dry mass 0.346837 kg, mass concentration, TOC 0.1091 kg/m3, mass concentration, calcium 0.039453 kg/m3, mass concentration, chlorine 0.030031 kg/m3, mass concentration, hydrogen 0.013365 kg/m3, mass concentration, nitrogen 0.031015 kg/m3, mass concentration, oxygen 0.069824 kg/m3, mass concentration, sodium 0.06456 kg/m3, mass concentration, sulfur 0.015602 kg/m3, water content 2882.2, wet mass 1000 kg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
- wire drawing, copper: 0.11269 kg; lognormal variance with pedigree 0.0021, pedigree (1,4,5,3,1)

## Emissions to nature
- Water [air, unspecified]: 0.0031929 m3; lognormal variance with pedigree 0.0407, pedigree (2,2,5,1,1)

## Sampling procedure
Environmental reports, direct contacts with factory representatives and publication of plant data.

## Extrapolations
Rough assumption for the use of heat in the process.

## Review by Roberto Dones 2007-08-23
Passed.
none
