# electricity voltage transformation from high to medium voltage, renewable energy products

Dataset: EcoSpold 2, unit process
Geography: CH
Time period: 2011-01-01 to 2022-12-31
Technology level: current
Classification: ISIC rev.4 ecoinvent: 3510:Electric power generation, transmission and distribution
Scenario: Business-as-Usual
System model: Substitution, consequential, long-term
Generated by: Christian Bauer
Published in: Itten R. 2012
Database: ecoinvent
isCopyrightProtected: false
accessRestrictedTo: 1

## General comment
This dataset represents the transformation of label-certified electricity voltage from high to medium voltage.
Definition of the voltage levels:
- High voltage level above 24 kV (large scale industry)
- Medium voltage level between 1 kV and 24 kV (medium to small scale industry, service sector
and public buildings)
- Low voltage level below 1 kV (Households)

## Included activities start
This activity starts with the label-certified high voltage electricity arriving at the transformer station.

## Included activities end
This activity ends with 1kWh of label-certified high voltage electricity transformed to medium voltage.

This dataset includes the losses during voltage transformation.

It doesn't include the transformer station itself as this is included in the dataset for the transmission network.

## Geography
Inventory represents Swiss data for label-certified electricity.

## Technology
Transformers are essential components of the electricity grid. They connect the different voltage levels.
Big power plants feed the electricity at a very high voltage to the electricity grid. Transformers between 600 MVA and 80 MVA can be found in substations, where the high transmission voltage is transformed to the medium distribution voltage. In an additional step the medium voltage is transformed to low voltage using transformers below 2.5 MVA. The small transformers below 2.5 MVA are allocated to the low voltage level, whereas all the other transformers are allocated to the medium voltage level.

## Time period
Production volume = lable-certified electricity available on the Swiss market in 2011.

## Reference product
- electricity, medium voltage, renewable energy products: 1 kWh; By-product classification allocatable product; CPC 17100: Electrical energy
  production volume 1.55092e10 kWh
  properties: carbon allocation 0 kg, carbon content 0, price 0.1 EUR2005

## Inputs from technosphere
- electricity, high voltage, renewable energy products: 1.0062 kWh

## Review by Carl Vadenbo 2015-05-22
The update of the whole electricity sector for the ecoinvent v3.2 database consist of hundreds of datasets. All these datasets have passed through a streamlined review processes where the underlying modelling of production volumes, technology shares and efficiencies was reviewed in detail prior to the datasets being submitted to the database.
