# triazine-compound production, unspecified

Dataset: EcoSpold 2, unit process
Geography: RER
Time period: 2000-01-01 to 2022-12-31
Technology level: current
Classification: ISIC rev.4 ecoinvent: 2021:Manufacture of pesticides and other agrochemical products
Classification: EcoSpold01Categories: agricultural means of production/pesticides
Tags: ConvertedDataset
Scenario: Business-as-Usual
System model: Substitution, consequential, long-term
Share of production covered: 100 %
Generated by: Jürgen Sutter
Published in: Nemecek, T. 2007
Database: ecoinvent
isCopyrightProtected: true
accessRestrictedTo: 1

## General comment
This dataset represents the production of triazine-compounds (1 kg of active ingredient). Raw materials are modelled with a stoichiometric calculation. Energy consumption is modelled with data from a similar process. The emissions are estimated. Infrastructure is included with a default value.
[This dataset was already contained in the ecoinvent database version 2. It was not individually updated during the transfer to ecoinvent version 3. Life Cycle Impact Assessment results may still have changed, as they are affected by changes in the supply chain, i.e. in other datasets. This dataset was generated following the ecoinvent quality guidelines for version 2. It may have been subject to central changes described in the ecoinvent version 3 change report (http://www.ecoinvent.org/database/ecoinvent-version-3/reports-of-changes/), and the results of the central updates were reviewed extensively. The changes added e.g. consistent water flows and other information throughout the database. The documentation of this dataset can be found in the ecoinvent reports of version 2, which are still available via the ecoinvent website. The change report linked above covers all central changes that were made during the conversion process.]

## Included activities start
From reception of precursors (ammonia, butene, chlorine, ethanol, hydrogen cyanide, isopropanol, sodium hydroxide, sulfuric acid, and water decarbonised) at the factory gate.

## Included activities end
This activity ends with triazine-compounds at the factory gate. The dataset includes the input materials, energy uses, infrastructure and emissions. The dataset doesn't include emulsives, additives etc.

## Geography
The inventory is modelled for Europe.

## Technology
Triazines are typically herbicides or microbiocides containing a triazine ring. Frequently found in groundwater, along with their transformation products. Triazines are produced by amination of cyanuric acid.
The dataset triazine-compounds was calculated from the arithmetic mean of all inputs and outputs of the production of atrazine, metamitron, simazin, and terbuthylazine.
Atrazine is produced in four steps from hydrogen cyanide:
HCN + Cl2 → ClCN + HCl
3 ClCN → C3Cl3N3
C3Cl3N3 + C2H7N → C5H6Cl2N4 + HCl
C5H6Cl2N4 + C3H9N → C8H14ClN5 + HCl
Precursors that are used for the atrazine production are ethylamine (C2H7N) and isopropylamine (C3H9N).
Metamitron is produced in eight steps from toluene:
C7H8 + 3 Cl2 → C7H5Cl3 + 3 HCl
C7H5Cl3 + H2O → C7H5ClO + 2 HCl
C7H5ClO + NaCN → C8H5NO + NaCl
C8H5NO + 2 H2O → C8H6O3 + NH3
C8H6O3 + CH4O → C9H8O3 + H2O
C9H8O3 + C2H6N2O → C11H12N2O3 + H2O
C11H12N2O3 + N2H4 → C10H12N4O2 + CH4O
C10H12N4O2 → C10H10N4O + H2O
Precursors that are used for the metamitron production are acetyl hydrazine (C2H6N2O) and hydrazine (N2H4).
Simazine is produced in three steps from hydrogen cyanide:
HCN + Cl2 → ClCN + HCl
3 ClCN → C3Cl3N3
C3Cl3N3 + C2H7N → C7H12ClN5 + HCl
A precursor that is used for the simazine production is ethylamine (C2H7N).
Terbuthylazine is produced in four steps from hydrogen cyanide:
HCN + Cl2 → ClCN + HCl
3 ClCN → C3Cl3N3
C3Cl3N3 + C2H7N → C5H6Cl2N4 + HCl
C5H6Cl2N4 + C4H11N → C9H16ClN5 + HCl
Precursors that are used for the terbuthylazine production are tert-butyl amine (C4H11N) and ethylamine (C2H7N).
Precursors:
Acetyl hydrazine (C2H6N2O) is produced from methyl acetate and hydrazine:
N2H4 + C3H6O2 → C2H6N2O + CH4O
Ethylamine (C2H7N) is produced from ethanol and ammonia:
C2H6O + NH3 → C2H7N + H2O
Hydrazine (C2H3N3) is produced in two steps from sodium hypochlorite:
NaOCl + NH3 → NH2Cl + NaOH
NH2Cl + NaOH + NH3 → N2H4 + NaCl + H2O
Isopropylamine (C3H9N) is produced from isopropanol and ammonia:
C3H8O + NH3 → C3H9N + H2O
tert-Butyl amine (C4H11N) is produced in two steps from 2-methylpropene:
C4H8 + H2O + HCN + H2SO4 → C5H11NO + H2SO4
C5H11NO + H2O + H2SO4 + 3 NaOH → C4H11N + NaCHO2 + Na2SO4 + 3 H2O

## Time period
Time of publications

## Parameters
- fraction, cooling water, cooling pond system, to air: 0.032 dimensionless; name fraction_CW_CP_to_air; lognormal variance with pedigree 0.0413, pedigree (2,3,1,3,1)
  Calculated based on literature value (Scown, C.D., 2011, Water Footprint of U.S. Transportation Fuels and supplying information of the article) (Vionnet, S., Quantis Water Database - Technical Report, 2012).
- fraction, cooling water, once-through system, to air: 0.004 dimensionless; name fraction_CW_OT_to_air; lognormal variance with pedigree 0.0413, pedigree (2,3,1,3,1)
  (same comment as for fraction, cooling water, cooling pond system, to air)
- fraction, cooling water, recirculating system, to air: 0.771 dimensionless; name fraction_CW_R_to_air; lognormal variance with pedigree 0.0413, pedigree (2,3,1,3,1)
  (same comment as for fraction, cooling water, cooling pond system, to air)
- fraction, cooling water, to air: 0.3875 dimensionless; name fraction_CW_to_air; = (0.5*fraction_CW_OT_to_air)+(0.5*fraction_CW_R_to_air); lognormal variance with pedigree 0.092025, pedigree (4,4,3,2,4)
  Calculated value based on literature value (see comments of the other parametres present in this dataset) and expert opinion. In the case when no industry/literature data are available about the type of cooling or directly fraction, cooling water, to air specific for the process a default assumption is applied. It is assumed that the once-through cooling system is used in 50% of all cases and recirculating system is used in another 50% of all cases.
- fraction, water, decarbonised, to air: 0.3875 dimensionless; name fraction_WDC_to_air; = fraction_CW_to_air; lognormal variance with pedigree 0.092025, pedigree (4,4,3,2,4)
  Calculated value. See comments in the other parametres present in this dataset. Decarbonised water is considered to be always used as cooling water, thus cooling water fractions to air are applied to all carbonised water input flows to calculate the amount of water consumed in the processes.

## Reference product
- triazine-compound, unspecified: 1 kg; By-product classification allocatable product; CPC 34663: Herbicides, anti-sprouting products and plant-growth regulators
  production volume 6.57533e6 kg
  properties: carbon allocation 0.475616 kg, carbon content 0.475616, carbon content, fossil 0.475616, carbon content, non-fossil 0, dry mass 1 kg, price 2.04 EUR2005, water content 0, water in wet mass 0 kg, wet mass 1 kg

## Inputs from technosphere
- ammonia, anhydrous, liquid: 0.12208 kg; lognormal variance with pedigree 0.036, pedigree (4,5,4,1,1)
  properties: dry mass 1 kg, wet mass 1 kg
- butene, mixed: 0.095074 kg; lognormal variance with pedigree 0.036, pedigree (4,5,4,1,1)
  properties: carbon content, fossil 0.857143, dry mass 1 kg, heating value, net 45.3 MJ, wet mass 1 kg
- chemical factory, organics: 1.6987e-9 unit; lognormal variance with pedigree 0.448, pedigree (4,5,5,5,5)
- chlorine, liquid: 1.2455 kg; lognormal variance with pedigree 0.036, pedigree (4,5,4,1,1)
  properties: dry mass 1 kg, wet mass 1 kg
- electricity, medium voltage: 1.49225 kWh; lognormal variance with pedigree 0.036, pedigree (4,5,4,1,1)
- ethanol, without water, in 99.7% solution state, from ethylene: 0.34868 kg; lognormal variance with pedigree 0.036, pedigree (4,5,4,1,1)
  properties: carbon content, fossil 0.521739, dry mass 1 kg, heating value, net 28.1 MJ, wet mass 1 kg
- heat, district or industrial, natural gas: 6.38149 MJ; lognormal variance with pedigree 0.036, pedigree (4,5,4,1,1)
  properties: heating value, net 1 MJ
- heat, district or industrial, other than natural gas: 3.56188 MJ; lognormal variance with pedigree 0.036, pedigree (4,5,4,1,1)
  properties: heating value, net 1 MJ
- hydrogen cyanide: 0.52623 kg; lognormal variance with pedigree 0.036, pedigree (4,5,4,1,1)
  properties: carbon content, fossil 0.444444, dry mass 1 kg, heating value, net 17.95 MJ, wet mass 1 kg
- isopropanol: 0.1088 kg; lognormal variance with pedigree 0.036, pedigree (4,5,4,1,1)
  properties: carbon content, fossil 0.6, dry mass 1 kg, heating value, net 34.3 MJ, wet mass 1 kg
- sodium hydroxide, without water, in 50% solution state: 1.2453 kg; lognormal variance with pedigree 0.036, pedigree (4,5,4,1,1)
  properties: dry mass 1 kg, heating value, net 3.03 MJ, wet mass 1 kg
- sulfuric acid: 0.31654 kg; lognormal variance with pedigree 0.036, pedigree (4,5,4,1,1)
  properties: dry mass 1 kg, wet mass 1 kg
- water, decarbonised: 0.00114673, 0.0313355, 0.0207718, 0.00631708, 1.98971e-5 kg (5 suppliers, which the file names only by identifier); sum of these 0.059591 kg; lognormal variance with pedigree 0.036, pedigree (4,5,4,1,1)
  properties: wet mass 1 kg

## Inputs from nature
- Water, cooling, unspecified natural origin [natural resource, in water]: 0.10192 m3; lognormal variance with pedigree 0.036, pedigree (4,5,4,1,1)

## Emissions to nature
- 2-Propanol [air, urban air close to ground]: 0.0002176 kg; lognormal variance with pedigree 0.188, pedigree (4,5,5,5,5)
- Ammonia [air, urban air close to ground]: 0.00030257 kg; lognormal variance with pedigree 0.218, pedigree (4,5,5,5,5)
- Carbon dioxide, fossil [air, urban air close to ground]: 0.31377 kg; lognormal variance with pedigree 0.1786, pedigree (4,5,5,5,5)
- Chlorine [air, urban air close to ground]: 0.0024937 kg; lognormal variance with pedigree 0.188, pedigree (4,5,5,5,5)
- Ethanol [air, urban air close to ground]: 0.00069737 kg; lognormal variance with pedigree 0.188, pedigree (4,5,5,5,5)
- Ethylamine [air, urban air close to ground]: 0.00061399 kg; lognormal variance with pedigree 0.188, pedigree (4,5,5,5,5)
- Isopropylamine [air, urban air close to ground]: 0.00019257 kg; lognormal variance with pedigree 0.188, pedigree (4,5,5,5,5)
- Sulfur dioxide [air, urban air close to ground]: 1.0866e-5 kg; lognormal variance with pedigree 0.1786, pedigree (4,5,5,5,5)
- Water [air, unspecified]: 0.0395171 m3; lognormal variance with pedigree 0.0407, pedigree (2,2,4,1,1)
- t-Butylamine [air, urban air close to ground]: 0.0002237 kg; lognormal variance with pedigree 0.188, pedigree (4,5,5,5,5)
- 2-Propanol [water, surface water]: 0.0010662 kg; lognormal variance with pedigree 0.448, pedigree (4,5,5,5,5)
- Ammonium [water, surface water]: 0.0030701 kg; lognormal variance with pedigree 0.188, pedigree (4,5,5,5,5)
- Chloride [water, surface water]: 1.0847 kg; lognormal variance with pedigree 0.448, pedigree (4,5,5,5,5)
- Ethanol [water, surface water]: 0.0034171 kg; lognormal variance with pedigree 0.448, pedigree (4,5,5,5,5)
- Ethylamine [water, surface water]: 0.0014736 kg; lognormal variance with pedigree 0.448, pedigree (4,5,5,5,5)
- Formate [water, surface water]: 0.06895 kg; lognormal variance with pedigree 0.448, pedigree (4,5,5,5,5)
- Isopropylamine [water, surface water]: 0.00046218 kg; lognormal variance with pedigree 0.448, pedigree (4,5,5,5,5)
- Sodium I [water, surface water]: 0.53946 kg; lognormal variance with pedigree 0.798, pedigree (4,5,5,5,5)
- Sulfate [water, surface water]: 0.31008 kg; lognormal variance with pedigree 0.188, pedigree (4,5,5,5,5)
- Water [water, unspecified]: 0.0624625 m3; lognormal variance with pedigree 0.0407, pedigree (2,2,4,1,1)
- t-Butylamine [water, surface water]: 0.00053689 kg; lognormal variance with pedigree 0.448, pedigree (4,5,5,5,5)

## Sampling procedure
Literature data

## Review by Thomas Nemecek 2010-03-11
Passed.
none

## Review by Roland Hischier 2011-09-30
Transfer of documentation done.
