# air separation, cryogenic

Dataset: EcoSpold 2, unit process
Geography: CA-QC
Time period: 1997-01-01 to 2022-12-31
Technology level: current
Classification: ISIC rev.4 ecoinvent: 2011:Manufacture of basic chemicals
Synonyms: Liquid oxygen; Oxygen molecule; Dioxygen; Pure oxygen; Molecular oxygen
Scenario: Business-as-Usual
System model: Substitution, consequential, long-term
Generated by: Pascal Lesage
Published in: Althaus H.-J. 2007
Database: ecoinvent
isCopyrightProtected: true
accessRestrictedTo: 1

## General comment
This dataset represents the production of liquefied nitrogen, oxygen and argon by cryogenic air separation. The liquefaction process of air represents an average cryogenic air separation process. Cryogenic air separation is currently the most efficient and cost-effective technology for producing large quantities of oxygen, nitrogen, and argon as gaseous or liquid products (Smith & Klosek 2001). The fraction of each output is based on the composition of air (1.4% Argon, 23.1% Oxygen and 75.5% Nitrogen).
Nitrogen (N2) constitutes 78.09% by volume of the air. It is colourless, odourless, and tasteless. Nitrogen is often used as an 'inert' gas due to its non-reactive nature with many materials. Commercial nitrogen is produced by different air separation processes, such as cryogenic liquefaction and distillation, pressure swing adsorption (PSA) and membrane separation. Liquid nitrogen, produced by the cryogenic air separation process, finds wide use as a refrigerant in applications such as cryogenic grinding of plastics and food freezing. Gaseous nitrogen is used in the chemical and petroleum industries for storage tank blanketing and vessel inerting applications, in the food industries to pack oxidisable foods and by the electronics and metals industries for the inert properties.
Oxygen (O2) constitutes 20.95% by volume of the air. Liquid oxygen is pale blue. The principal use of oxygen stems from its strong oxidising properties. Oxygen is produced by air separation processes that use either cryogenic liquefaction and distillation or separation with vacuum swing adsorption (VSA). The major commercial uses of oxygen are in metal manufacturing, metal fabricating, and in health services. Oxygen is also used extensively in the chemical industry and in the pulp and paper industry.
Argon (Ar) is a monatomic, chemically inert gas composing slightly less than 0.93% by volume of the air. Argon is colourless, odourless, tasteless, non-corrosive, non-flammable, and non-toxic. Argon is the most abundant and most used of the noble gases. Commercial argon is the product of cryogenic air separation. Argon is the most abundant and most used of the noble gases. Its chief use is in metallurgy, where it provides an inert atmosphere in which hot metals can be worked. Because argon is very un-reactive, it prevents chemical reactions of the very hot metal being welded or forged.
This dataset is based on literature data and estimations.
References:
Althaus H.-J., Chudacoff M., Hischier R., Jungbluth N., Osses M. and Primas A. (2007) Life Cycle Inventories of Chemicals. ecoinvent report No. 8, v2.0. EMPA Dübendorf, Swiss Centre for Life Cycle Inventories, Dübendorf, CH.
Smith A. R. and Klosek J. (2001) A Review of Air Separation Technologies and their Integration with Energy Conversion Processes. In: Fuel Processing Technology, 70(2), pp. 115-134.

## Included activities start
From the input of air into an air separation facility.

## Included activities end
This activity ends with the production of liquefied nitrogen, oxygen and argon by cryogenic air separation. The dataset includes as input the electricity for processing, the cooling water, and the infrastructure for the air separation plant. This dataset does not include the extraction of noble gases from the liquid gases (e.g. Xenon and Krypton from the liquid oxygen). Air, which is the main resource for air liquefaction, is not considered because of its inexhaustibility and the short recycling time of the withdrawn products (especially for argon and nitrogen, less for oxygen). Emissions to the air are already included in the preceding processes, especialy in the electricity production, and are therefore not considered here. The separated CO2 and water vapour from the separation process were not accounted as emissions. The reason is that these components were already contained in the air input, so that they do not represent effective emissions. As wastewater, there is the unevaporated share of the make-up cooling water, but it is not listed because only minor emissions from this source are expected.

## Geography
Data from several producers in Europe, as well as U.S. and Russian producers. The data are assumed to be representative of the production in this geography.

## Technology
The main components of air are nitrogen and oxygen, but it also contains smaller amounts of water vapour, argon, carbon dioxide and very small amounts of other gases (e.g. noble gases). The purification and liquefaction of various components of air, in particular oxygen, nitrogen and argon, is an important industrial process, and it is called cryogenic air separation.
Cryogenic distillation accounts for approximately 85% of nitrogen and over 95% of oxygen production. It is the preferred supply mode for high volume and high purity requirements (Praxair 2002). Cryogenic air separation is currently the most efficient and cost-effective technology for producing large quantities of oxygen, nitrogen, and argon as gaseous or liquid products (Smith & Klosek 2001). Besides the air needed as a resource the major input for the liquefying process is the electricity to compress the inlet air, which normally comprises 95% of the utility costs of a cryogenic air separation plant. In some plants the amount of processed air (in Nm3) can be up to 5 times larger than the derived liquid products (Cryogenmash 2001). In these plants, the waste gas stream is naturally also much larger (in order to obtain the mass balance). As output of the cryogenic air separation there are three products: liquid oxygen, liquid nitrogen and liquid crude argon. The assumed process includes no gaseous co-products. In reality gaseous products are also processed if there is a demand at the production site. The investigated cryogenic air separation process leads to liquid products in the following quality:
- Liquid oxygen: min. 99.6 wt-%
- Liquid nitrogen: min. 99.9995 wt-%
- Liquid argon, crude: 96-98 wt-%
An air pre-treatment section downstream of the air compression (0.7 MPa) and after cooling removes process contaminants, including water, carbon dioxide, and hydrocarbons. The air is then cooled to cryogenic temperatures and distilled into oxygen, nitrogen, and, optionally, argon streams. Alternate compressing and expanding the recycled air can liquefy most of it.
Numerous configurations of heat exchange and distillation equipment can separate air into the required product streams. These process alternatives are selected based on the purity and number of product streams, required trade-offs between capital costs and power consumption, and the degree of integration between the air separate unit and other facility units. This process requires very complicated heat integration techniques because the only heat sink for cooling or condensation is another cryogenic stream in the process.
Since the boiling point of argon is between that of oxygen and nitrogen, it acts as an impurity in the product streams. If argon were collected and separated from the oxygen product, an oxygen purity of less than 95% by volume would result (Barron & Randall 1985). On the other hand, if argon were collected with the nitrogen product, the purity of nitrogen would not exceed 98.7% by volume. To achieve higher purities of oxygen and nitrogen the elimination of argon is necessary.
Commercial argon is the product of cryogenic air separation, where liquefaction and distillation processes are used to produce a low-purity crude argon product.
Praxair (2002) Gases > Nitrogen > Production of Nitrogen. Praxair Technology Inc. 2002. Retrieved 16.01.2002 from http://www.praxair.com
Smith A. R. and Klosek J. (2001) A Review of Air Separation Technologies and their Integration with Energy Conversion Processes. In: Fuel Processing Technology, 70(2), pp. 115-134.
Barron and Randall F. (1985) Cryogenic Systems. 2 Edition. Oxford University Press, New York
Cryogenmash (2001) KxAxApx Type Double-Pressure Air Separation Plants. Gen-eral Data. Cryogenic Industries, Moscow, Russia. Retrieved 16.01.2002 from http://www.cryogenmash.ru/production/vru/vru_kgag2_e.htm

## Parameters
- Quebec gross domestic product 2011: 3.11e11 USD(2011); name quebecGDP2011; lognormal variance with pedigree 0.0086, pedigree (1,1,4,1,1)
  Quebec Gross domestic product for 2011, expressed in 2011 USD. Source: Institut de la statistique du Québec. Converted from CAD to USD using a yearly average exchange rate of 0.989 CAD/USD (Source: bank of Canada).
- fraction, cooling water, cooling pond system, to air: 0.032 dimensionless; name fraction_CW_CP_to_air; lognormal variance with pedigree 0.0413, pedigree (2,3,1,3,1)
  Calculated based on literature value (Scown, C.D., 2011, Water Footprint of U.S. Transportation Fuels and supplying information of the article) (Vionnet, S., Quantis Water Database - Technical Report, 2012).
- fraction, cooling water, once-through system, to air: 0.004 dimensionless; name fraction_CW_OT_to_air; lognormal variance with pedigree 0.0413, pedigree (2,3,1,3,1)
  (same comment as for fraction, cooling water, cooling pond system, to air)
- fraction, cooling water, recirculating system, to air: 0.771 dimensionless; name fraction_CW_R_to_air; lognormal variance with pedigree 0.0413, pedigree (2,3,1,3,1)
  (same comment as for fraction, cooling water, cooling pond system, to air)
- fraction, cooling water, to air: 0.3875 dimensionless; name fraction_CW_to_air; = (0.5*fraction_CW_OT_to_air)+(0.5*fraction_CW_R_to_air); lognormal variance with pedigree 0.092025, pedigree (4,4,3,2,4)
  Calculated value based on literature value (see comments of the other parametres present in this dataset) and expert opinion. In the case when no industry/literature data are available about the type of cooling or directly fraction, cooling water, to air specific for the process a default assumption is applied. It is assumed that the once-through cooling system is used in 50% of all cases and recirculating system is used in another 50% of all cases.
- world gross domestic product 2011: 7e13 USD(2011); name worldGDP2011; lognormal variance with pedigree 0.0086, pedigree (1,1,4,1,1)
  World Gross domestic product for 2011, expressed in 2011 USD. Source: World Bank

## Reference product
- oxygen, liquid: 1 kg; By-product classification allocatable product; CPC 34210: Hydrogen, nitrogen, oxygen, carbon dioxide and rare gases; inorganic oxygen compounds of non-metals n.e.c.
  production volume 3.55429e8 kg
  properties: carbon allocation 0 kg, carbon content 0, carbon content, fossil 0, carbon content, non-fossil 0, dry mass 1 kg, price 0.155 EUR2005, water content 0, water in wet mass 0 kg, wet mass 1 kg

## Inputs from technosphere
- air separation facility: 2.72727e-9 unit; lognormal variance with pedigree 0.408, pedigree (5,5,5,5,3)
- argon, crude, liquid: -0.0606061 kg
  properties: dry mass 1 kg, price 0.37 EUR2005, wet mass 1 kg
- electricity, medium voltage: 3.4632 kWh; lognormal variance with pedigree 0.016, pedigree (3,4,5,5,1)
- nitrogen, liquid: -3.2684 kg
  properties: dry mass 1 kg, price 0.0615 EUR2005, wet mass 1 kg

## Inputs from nature
- Argon-40 [natural resource, in air]: 0.0606061 kg; lognormal variance with pedigree 0.0006, pedigree (1,1,5,1,1)
- Nitrogen [natural resource, in air]: 3.2684 kg; lognormal variance with pedigree 0.0006, pedigree (1,1,5,1,1)
- Oxygen [natural resource, in air]: 1 kg; lognormal variance with pedigree 0.0006, pedigree (1,1,5,1,1)
- Water, cooling, unspecified natural origin [natural resource, in water]: 0.131558 m3; lognormal variance with pedigree 0.0152, pedigree (2,3,5,5,1)

## Emissions to nature
- Water [air, unspecified]: 0.0509789 m3; lognormal variance with pedigree 0.0427, pedigree (2,2,5,5,1)
- Water [water, unspecified]: 0.0805795 m3; lognormal variance with pedigree 0.0427, pedigree (2,2,5,5,1)

## Sampling procedure
Data on energy demand and water resources based on several data sources of different plant size. Infrastructure demand estimated from data of small plants.

## Extrapolations
Energy data of good representativity. Cooling water demand and infrastructure extrapolated from technology of lower representativity.
This dataset has been copied from an original dataset covering the geography RER. The uncertainty has been adjusted accordingly.

## Review by Gregor Wernet 2017-08-04
This dataset was additionally reviewed in a separate review process by Eric Johnson of Atlantic Consulting as well as Emilia Moreno Ruiz and Gregor Wernet of ecoinvent.
