# chlorine production, liquid

Dataset: EcoSpold 2, unit process
Geography: RoW
Time period: 2000-01-01 to 2022-12-31
Technology level: current
Classification: ISIC rev.4 ecoinvent: 2011:Manufacture of basic chemicals
Scenario: Business-as-Usual
System model: Substitution, consequential, long-term
Generated by: Gregor Wernet
Published in: Althaus H.-J. 2007
Database: ecoinvent
isCopyrightProtected: true
accessRestrictedTo: 1

## General comment
A simple dataset modelling the liquefaction of gaseous chlorine. This is based on the old dataset of the liquid chlorine production mix in ecoinvent v2.x. Further background information is available in the main source.

## Included activities end
Only the liquefaction step is included.

## Reference product
- chlorine, liquid: 1 kg; By-product classification allocatable product; CPC 34231: Chemical elements n.e.c.; inorganic acids except phosphoric, nitric and sulphonitric; inorganic oxygen compoun[…]
  production volume 3.32752e10 kg
  properties: carbon allocation 0 kg, carbon content 0, carbon content, fossil 0, carbon content, non-fossil 0, dry mass 1 kg, price 0.148 EUR2005, water content 0, water in wet mass 0 kg, wet mass 1 kg

## Inputs from technosphere
- chlorine, gaseous: 1 kg; lognormal variance with pedigree 0, pedigree (1,1,5,1,1)
  properties: dry mass 1 kg, wet mass 1 kg
- electricity, medium voltage: 0.00667088, 0.000249592, 0.00317115, 0.0550392, 0.00462151, 0.00024771 kWh (6 suppliers, which the file names only by identifier); sum of these 0.07 kWh; lognormal variance with pedigree 0.0027, pedigree (1,4,5,3,1)

## Sampling procedure
Official statistics from the Association of European Chlorine Producers (EuroChlor)
