# hard coal mine operation and hard coal preparation

Dataset: EcoSpold 2, unit process
Geography: RoW
Time period: 1999-01-01 to 2022-12-31
Technology level: current
Classification: ISIC rev.4 ecoinvent: 0510:Mining of hard coal
Classification: EcoSpold01Categories: hard coal/production
Tags: ConvertedDataset
Scenario: Business-as-Usual
System model: Substitution, consequential, long-term
Generated by: Roberto Dones
Published in: Röder, A. 2007
Database: ecoinvent
isCopyrightProtected: true
accessRestrictedTo: 1

## General comment
This dataset represents the global average production of 1 kg hard coal (useable output) with an average heating value of 19.1MJ/kg. Life time of the mine is assumed to be 20 years for operation. The production volume is based on the year 2016. Data are normalized by the mass unit of produced coal, including preparation and without differentiating steam coal from the rest.
Mine reclamation is not included in this module, because it mostly concerns the tailings, which are described in a separate module. Electricity, heating from heavy oil industrial boilers, and diesel uses are included. The use of the module "heat, at hard coal industrial furnace 1-10MW" leads to an underestimation of emissions, because the quality of coal burned at mines is usually lower than coal burned in industrial boilers elsewhere. Water uses in mining and coal washing have been approximately described using the module "tap water". Particle emissions are assumed to be all greater than 10 micrometer. Radon emissions are average value worldwide.
[This dataset is meant to replace the following datasets:
- hard coal mine operation, GLO, 1999 - 2002]

## Included activities start
From hard coal embedded in rock.

## Included activities end
The activitiy ends with loading of hard coal on lorries. The dataset includes the blasting of rock and the operation of machinery used in mining.

## Technology
Not specified.

## Parameters
- fraction, process water, to air: 0.15 dimensionless; name fraction_PW_to_air; lognormal variance with pedigree 0.092025, pedigree (4,4,3,2,4)
  Literature value. In case when no industry/process specific data are available, default evaporation fraction value is used. This value is 15% and is based on literature (Statistics Canada, 2007 & Shaffer, K.H., 2008, Consumptive water use in the Great Lakes Basin, USGS & Shiklomanov, 2003, World Water Resources at the Beginning of the 21st Century) and has been approved by an expert.
- fraction, tap water, to air: 0.15 dimensionless; name fraction_TW_to_air; = fraction_PW_to_air; lognormal variance with pedigree 0.092025, pedigree (4,4,3,2,4)
  Calculated value. See comment in the other parametres present in this dataset. Tap water is considered to be always used as process water, thus process water fractions to air are applied to all tap water input flows to calculate the amount of water consumed in the processes.

## Reference product
- hard coal: 1 kg; By-product classification allocatable product; CPC 11010: Hard coal
  production volume 1.0877e12 kg
  properties: carbon allocation 0.7943 kg, carbon content 0.845, carbon content, fossil 0.845, carbon content, non-fossil 0, dry mass 0.94 kg, heating value, net 27.91 MJ, price 0.036 EUR2005, water content 0.0638298, water in wet mass 0.06 kg, wet mass 1 kg

## Inputs from technosphere
- blasting: 0.000494544 kg; lognormal variance with pedigree 0.122, pedigree (1,1,5,5,1)
- coal slurry: -0.236436 kg; lognormal variance with pedigree 0.232, pedigree (1,1,1,5,1)
  properties: carbon content, fossil 0.124, dry mass 1 kg, wet mass 1 kg
- diesel, burned in building machine: 0.0314403 MJ; lognormal variance with pedigree 0.122, pedigree (1,1,5,5,1)
  properties: heating value, net 1 MJ
- electricity, high voltage: 3.99337e-5, 2.08989e-5, 0.000132429, 0.000261471, 7.07507e-5, 0.000866498, 2.94758e-5, 0.000459067, 8.73042e-5, 3.96885e-5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 kWh (40 suppliers, which the file names only by identifier); sum of these 0.0346391 kWh; lognormal variance with pedigree 0.122, pedigree (1,1,5,5,1)
- heat, district or industrial, other than natural gas: 0.0857835 MJ; lognormal variance with pedigree 0.122, pedigree (1,1,5,5,1)
  properties: heating value, net 1 MJ
- mine infrastructure, open cast, hard coal: 6.94272e-12 unit; lognormal variance with pedigree 0.002, pedigree (1,1,5,5,1)
  properties: capacity [kg/s] 31.71 kg/s, lifetime capacity [kg] 3e10 kg
- mine infrastructure, underground, hard coal: 2.63682e-11 unit; lognormal variance with pedigree 0.122, pedigree (1,1,5,5,1)
  properties: capacity [kg/s] 31.71 kg/s, lifetime capacity [kg] 3e10 kg
- reinforcing steel: 0.000493589 kg; lognormal variance with pedigree 0.122, pedigree (1,1,5,5,1)
  properties: carbon content, fossil 0.004, dry mass 1 kg, wet mass 1 kg
- sawlog and veneer log, hardwood, measured as solid wood under bark: 9.78204e-7 m3; lognormal variance with pedigree 0.122, pedigree (1,1,5,5,1)
  properties: carbon content, non-fossil 0.494, dry mass 650 kg, heating value, net 6071.3 MJ, water content 0.7, wet mass 1105 kg
- spoil from hard coal mining: -4.47 kg; lognormal variance with pedigree 0.012, pedigree (1,1,1,5,1)
  properties: carbon content, fossil 0.007879, dry mass 1 kg, wet mass 1 kg
- tap water: 0.0218669, 0.0848906, 0.295504 kg (3 suppliers, which the file names only by identifier); sum of these 0.402262 kg; lognormal variance with pedigree 0.122, pedigree (1,1,5,5,1)
  properties: carbon content, fossil 0.00178991, dry mass 0.000337476 kg, water content 2962.17, wet mass 1 kg

## Inputs from nature
- Coal, hard, unspecified [natural resource, in ground]: 1.24735 kg; lognormal variance with pedigree 0.042, pedigree (1,1,5,5,1)
- Gas, mine, off-gas, process, coal mining [natural resource, in ground]: 0.0111517 Sm3; lognormal variance with pedigree 0.122, pedigree (1,1,5,5,1)
- Occupation, dump site [natural resource, land]: 0.0145221 m2*year; lognormal variance with pedigree 0.652, pedigree (1,1,5,5,1)
- Occupation, mineral extraction site [natural resource, land]: 0.00226526 m2*year; lognormal variance with pedigree 1.332, pedigree (1,1,5,5,1)
- Transformation, from mineral extraction site [natural resource, land]: 3.96226e-7 m2; lognormal variance with pedigree 0.652, pedigree (1,1,5,5,1)
- Transformation, from unspecified [natural resource, land]: 0.000138899 m2; lognormal variance with pedigree 1.332, pedigree (1,1,5,5,1)
- Transformation, to annual crop [natural resource, land]: 3.96226e-7 m2; lognormal variance with pedigree 0.652, pedigree (1,1,5,5,1)
- Transformation, to dump site [natural resource, land]: 0.000120032 m2; lognormal variance with pedigree 0.652, pedigree (1,1,5,5,1)
- Transformation, to mineral extraction site [natural resource, land]: 1.88664e-5 m2; lognormal variance with pedigree 1.332, pedigree (1,1,5,5,1)
- Water, well, in ground [natural resource, in water]: 0.00189224 m3; lognormal variance with pedigree 0.302, pedigree (1,1,5,5,1)

## Emissions to nature
- Methane, fossil [air, non-urban air or from high stacks]: 0.00795973 kg; lognormal variance with pedigree 0.186, pedigree (4,5,5,5,4)
- Particulate Matter, > 10 um [air, non-urban air or from high stacks]: 0.000166552 kg; lognormal variance with pedigree 0.462, pedigree (1,1,5,5,1)
- Radon-222 [air, non-urban air or from high stacks]: 0.0163077 kBq; lognormal variance with pedigree 0.652, pedigree (1,1,5,5,1)
- Sulfur dioxide [air, non-urban air or from high stacks]: 0.00134615 kg; lognormal variance with pedigree 0.652, pedigree (1,1,5,5,1)
- Water [air, unspecified]: 0.000344175 m3; lognormal variance with pedigree 0.092025, pedigree (4,4,5,2,4)
- Aluminium III [water, ground-]: 1e-6 kg; lognormal variance with pedigree 0.882, pedigree (1,1,5,5,1)
- Ammonium [water, ground-]: 1e-6 kg; lognormal variance with pedigree 0.882, pedigree (1,1,5,5,1)
- Chloride [water, ground-]: 0.0129953 kg; lognormal variance with pedigree 0.232, pedigree (1,1,5,5,1)
- Dissolved solids [water, ground-]: 1.5e-5 kg; lognormal variance with pedigree 0.462, pedigree (1,1,5,5,1)
- Fluoride [water, ground-]: 3e-6 kg; lognormal variance with pedigree 0.232, pedigree (1,1,5,5,1)
- Iron ion [water, ground-]: 2e-6 kg; lognormal variance with pedigree 0.882, pedigree (1,1,5,5,1)
- Manganese II [water, ground-]: 1e-6 kg; lognormal variance with pedigree 0.232, pedigree (1,1,5,5,1)
- Nickel II [water, ground-]: 1e-7 kg; lognormal variance with pedigree 0.462, pedigree (1,1,5,5,1)
- Solids, inorganic [water, ground-]: 2.21839e-5 kg; lognormal variance with pedigree 0.882, pedigree (1,1,5,5,1)
- Strontium [water, ground-]: 5e-6 kg; lognormal variance with pedigree 0.232, pedigree (1,1,5,5,1)
- Sulfate [water, ground-]: 0.0005 kg; lognormal variance with pedigree 0.882, pedigree (1,1,5,5,1)
- Water [water, unspecified]: 0.00195032 m3; lognormal variance with pedigree 0.092025, pedigree (4,4,5,2,4)
- Zinc II [water, ground-]: 1e-7 kg; lognormal variance with pedigree 0.462, pedigree (1,1,5,5,1)

## Sampling procedure
literature

## Extrapolations
see Geography/Text This dataset has been copied from an original dataset covering the geography of China. The uncertainty has been adjusted accordingly.

## Review by Rolf Frischknecht 2010-04-03
passed

## Review by Roland Hischier 2011-09-28
Review due to Update of production volumes to 2008 data
