# urea ammonium nitrate production

Dataset: EcoSpold 2, unit process
Geography: RNA
Time period: 2011-01-01 to 2022-12-31
Technology level: current
Classification: ISIC rev.4 ecoinvent: 2012:Manufacture of fertilizers and nitrogen compounds
Synonyms: UAN, UAN 30
Scenario: Business-as-Usual
System model: Substitution, consequential, long-term
Generated by: Anna Kounina
Database: ecoinvent
isCopyrightProtected: true
accessRestrictedTo: 1

## General comment
This dataset represents the production of 1 kg of urea ammonium nitrate, with 30% N. Urea ammonium nitrate (UAN) is a liquid fertiliser with 28-32 % nitrogen (N) content. Urea ammonium nitrate solutions are produced through mixing and cooling of concentrated urea and ammonium nitrate solutions. Both continuous and batch processes exist. The amount of CO2 recovered from the ammonia synthesis and used in urea production, will be inevitably and completely released back to the atmosphere after application of UAN to the soil.
The main data sources for this dataset are Fertilizers Europe (2014, 2016). Additional data sources are listed as follows.
References:
Fertilizers Europe (2000): Best Available Techniques for Pollution Prevention and Control in the European Fertilizer Industry. Booklet No. 1 of 8: Production of Ammonia. Fertilizers Europe, Brussels.
Kongshaug G. (1998): Energy Consumption and Greenhouse Gas Emissions in Fertilizer Production. IFA 20th July 1998
Davies J., Haglund C. (1999): Life Cycle Inventory of Fertiliser Production. SIK-Report No 654 1999. Chalmers University of Technology, Sweden.
Fertilizers Europe (2014): Average Emissions Year 2011. Fertilizers Europe Environmental report (internal).
Fertilizers Europe (2000): Best Available Techniques for Pollution Prevention and Control in the European Fertilizer Industry. Booklet No. 5 of 8: Production of urea and urea ammonium nitrate. Fertilizers Europe, Brussels.
Fertilizers Europe (2016): Carbon Footprint Calculator for Fertilizer Production. Specification. Version 2.1
Fertilizers Europe (2016): Average Emissions Year 2014. Fertilizers Europe Environmental report (internal). Used for updated energy and GHG emission in Carbon Footprint Calculator

## Included activities start
The activity includes all the raw and processed materials necessary to produce this product. Urea, ammonium nitrate, electricity and heat (as fuel oil) are included. Direct emissions of carbon dioxide to air are included.

## Included activities end
The activity ends with the final product being ready for transportation at the production site.

## Geography
The dataset is representative of urea ammonium nitrate production in North America, adapted from data collected in European fertiliser plants.

## Technology
This datasets corresponds to the technology used in North American fertiliser plants. The production of urea ammonium nitrate involves the combination of urea with ammonium nitrate, using heat and electricity.

## Time period
Primary data were collected on fertiliser production for the year 2011. These data were based on annual average data for the year 2011.

## Reference product
- urea ammonium nitrate mix: 1 kg; By-product classification allocatable product; CPC 34619: Other nitrogenous fertilizers and mixtures, n.e.c.
  production volume 1.61205e10 kg
  properties: carbon allocation 0.0659982 kg, carbon content 0.0879977, carbon content, fossil 0.0879977, carbon content, non-fossil 0, dry mass 0.75 kg, hydrogen content 0.095042, nitrogen content 0.401231, oxygen content 0.749063, price 0.555669 EUR2005, water content 0.333333, water in wet mass 0.25 kg, wet mass 1 kg

## Inputs from technosphere
- ammonium nitrate: 0.469 kg; lognormal variance with pedigree 0.0066, pedigree (3,4,5,1,1)
  properties: dry mass 1 kg, hydrogen content 0.0503678, nitrogen content 0.349979, oxygen content 0.599654, wet mass 1 kg
- chemical factory, organics: 4.002e-10 unit; lognormal variance with pedigree 0.306, pedigree (3,4,5,1,1)
- electricity, low voltage: 0.0277778 kWh; lognormal variance with pedigree 0.0066, pedigree (3,4,5,1,1)
- heavy fuel oil, burned in refinery furnace: 0.00571239 MJ; lognormal variance with pedigree 0.0066, pedigree (3,4,5,1,1)
  properties: carbon content, fossil 0.849, dry mass 0.0242718 kg, wet mass 0.0242718 kg
- tap water: 0.205 kg; lognormal variance with pedigree 0.0066, pedigree (3,4,5,1,1)
  properties: carbon content, fossil 0.00178991, dry mass 0.000337476 kg, water content 2962.17, wet mass 1 kg
- urea: 0.326 kg; lognormal variance with pedigree 0.0066, pedigree (3,4,5,1,1)
  properties: carbon content, fossil 0.199995, dry mass 1 kg, hydrogen content 0.0671317, nitrogen content 0.466462, oxygen content 0.266412, wet mass 1 kg

## Extrapolations
The data were extrapolated from respective data for the geography of Europe, i.e. production of ammonia and nitric acid are adapted to reflect production in North America.
