# asbestos production, crysotile type

Dataset: EcoSpold 2, unit process
Geography: GLO
Time period: 2000-01-01 to 2022-12-31
Technology level: current
Classification: EcoSpold01Categories: construction materials/others
Classification: ISIC rev.4 ecoinvent: 0899:Other mining and quarrying n.e.c.
Tags: ConvertedDataset
Scenario: Business-as-Usual
System model: Substitution, consequential, long-term
Generated by: Roland Hischier
Published in: Althaus H.-J. 2007
Database: ecoinvent
isCopyrightProtected: true
accessRestrictedTo: 1

## General comment
The functional unit represent 1 kg of asbestos. Quite a large uncertainty of the process data due to weak data on the production process.
[This dataset was already contained in the ecoinvent database version 2. It was not individually updated during the transfer to ecoinvent version 3. Life Cycle Impact Assessment results may still have changed, as they are affected by changes in the supply chain, i.e. in other datasets. This dataset was generated following the ecoinvent quality guidelines for version 2. It may have been subject to central changes described in the ecoinvent version 3 change report (http://www.ecoinvent.org/database/ecoinvent-version-3/reports-of-changes/), and the results of the central updates were reviewed extensively. The changes added e.g. consistent water flows and other information throughout the database. The documentation of this dataset can be found in the ecoinvent reports of version 2, which are still available via the ecoinvent website. The change report linked above covers all central changes that were made during the conversion process.]

## Included activities end
Raw materials, machineries and energy consumption for production, estimated emissions to air from production and infrastructure of the site (approximation). No water emissions.

## Geography
Data are used here as European average.

## Technology
Data approximated with data from lime mining, crushing and milling.

## Time period
date of published literature

## Parameters
- fraction, process water, to air: 0.15 dimensionless; name fraction_PW_to_air; lognormal variance with pedigree 0.092025, pedigree (4,4,3,2,4)
  Literature value. In case when no industry/process specific data are available, default evaporation fraction value is used. This value is 15% and is based on literature (Statistics Canada, 2007 & Shaffer, K.H., 2008, Consumptive water use in the Great Lakes Basin, USGS & Shiklomanov, 2003, World Water Resources at the Beginning of the 21st Century) and has been approved by an expert.

## Reference product
- asbestos, crysotile type: 1 kg; By-product classification allocatable product; CPC 16390: Other minerals n.e.c.
  production volume 1 kg
  properties: carbon allocation 0 kg, carbon content 0, carbon content, fossil 0, carbon content, non-fossil 0, dry mass 1 kg, price 0.18 EUR2005, water content 0, water in wet mass 0 kg, wet mass 1 kg

## Inputs from technosphere
- blasting: 7.73e-5 kg; lognormal variance with pedigree 0.0367, pedigree (4,3,5,3,3)
- conveyor belt: 2.78e-8 m; lognormal variance with pedigree 0.3267, pedigree (4,3,5,3,3)
- diesel, burned in building machine: 0.018 MJ; lognormal variance with pedigree 0.0367, pedigree (4,3,5,3,3)
  properties: heating value, net 1 MJ
- electricity, medium voltage: 0.0325 kWh; lognormal variance with pedigree 0.0367, pedigree (4,3,5,3,3)
- heat, central or small-scale, other than natural gas: 0.0033746 MJ; lognormal variance with pedigree 0.0367, pedigree (4,3,5,3,3)
  properties: heating value, net 1 MJ
- heat, district or industrial, other than natural gas: 0.0898 MJ; lognormal variance with pedigree 0.0367, pedigree (4,3,5,3,3)
  properties: heating value, net 1 MJ
- industrial machine, heavy, unspecified: 0.000154633, 7.63668e-5 kg (2 suppliers, which the file names only by identifier); sum of these 0.000231 kg; lognormal variance with pedigree 0.3267, pedigree (4,3,5,3,3)
- limestone quarry infrastructure: 5.25e-11 unit; lognormal variance with pedigree 0.3267, pedigree (4,3,5,3,3)
- recultivation, limestone mine: 6.52e-6 m2; lognormal variance with pedigree 0.3267, pedigree (4,3,5,3,3)

## Inputs from nature
- Chrysotile [natural resource, in ground]: 1.11 kg; lognormal variance with pedigree 0.0367, pedigree (4,3,5,3,3)
- Occupation, mineral extraction site [natural resource, land]: 8.48e-5 m2*year; lognormal variance with pedigree 0.0867, pedigree (4,3,5,3,3)
- Transformation, from forest, unspecified [natural resource, land]: 6.52e-6 m2; lognormal variance with pedigree 0.1667, pedigree (4,3,5,3,3)
- Transformation, to mineral extraction site [natural resource, land]: 6.52e-6 m2; lognormal variance with pedigree 0.1667, pedigree (4,3,5,3,3)
- Water, well, in ground [natural resource, in water]: 2.93e-5 m3; lognormal variance with pedigree 0.0367, pedigree (4,3,5,3,3)

## Emissions to nature
- Particulate Matter, < 2.5 um [air, urban air close to ground]: 8.87e-6 kg; lognormal variance with pedigree 0.3267, pedigree (4,3,5,3,3)
- Particulate Matter, > 10 um [air, urban air close to ground]: 0.000112 kg; lognormal variance with pedigree 0.0867, pedigree (4,3,5,3,3)
- Particulate Matter, > 2.5 um and < 10um [air, urban air close to ground]: 4.78e-5 kg; lognormal variance with pedigree 0.1667, pedigree (4,3,5,3,3)
- Water [air, unspecified]: 4.395e-6 m3; lognormal variance with pedigree 0.0407, pedigree (2,2,5,1,1)
- Water [water, unspecified]: 2.4905e-5 m3; lognormal variance with pedigree 0.0407, pedigree (2,2,5,1,1)

## Extrapolations
see technology

## Review by Heiko Kunst 2007-11-09
Passed.
