# dolomite quarry construction

Dataset: EcoSpold 2, unit process
Geography: RoW
Time period: 2000-01-01 to 2022-12-31
Technology level: current
Classification: EcoSpold01Categories: construction materials/additives
Classification: ISIC rev.4 ecoinvent: 4290:Construction of other civil engineering projects
Synonyms: quarry
Scenario: Business-as-Usual
System model: Substitution, consequential, long-term
Generated by: Avraam Symeonidis
Database: ecoinvent
isCopyrightProtected: true
accessRestrictedTo: 1

## General comment
This dataset represents the construction of 1 dolomite mine. Data are estimated from air-picture and the mine is considered to have an annual yield of about 380'000 t

## Included activities start
From unoccupied land forseen for a mining operation.

## Included activities end
The activity ends with the constructed mine. The dataset includes the 'land-use' of the built part of the mine and therefore the production places and the paved roads

## Technology
Data corresponds to a medium size mine.

## Reference product
- dolomite quarry infrastructure: 1 unit; By-product classification allocatable product; CPC 53269: Other constructions for manufacturing
  production volume 3.96633 unit
  properties: carbon allocation 0 kg, carbon content 0, lifetime 50 year, lifetime capacity [kg] 1.9e10 kg, price 122109 EUR2005

## Inputs from technosphere
- building, hall: 500 m2; lognormal variance with pedigree 0.3701, pedigree (4,2,5,5,1)
- building, multi-storey: 480 m3; lognormal variance with pedigree 0.3701, pedigree (4,2,5,5,1)

## Inputs from nature
- Occupation, industrial area [natural resource, land]: 29000 m2*year; lognormal variance with pedigree 0.1001, pedigree (4,2,5,5,1)
- Occupation, traffic area, road network [natural resource, land]: 20000 m2*year; lognormal variance with pedigree 0.1001, pedigree (4,2,5,5,1)
- Transformation, from forest, unspecified [natural resource, land]: 980 m2; lognormal variance with pedigree 0.1901, pedigree (4,2,5,5,1)
- Transformation, to industrial area [natural resource, land]: 580 m2; lognormal variance with pedigree 0.1901, pedigree (4,2,5,5,1)
- Transformation, to traffic area, road network [natural resource, land]: 400 m2; lognormal variance with pedigree 0.1901, pedigree (4,2,5,5,1)

## Sampling procedure
Data is extrapolated from a limestone quarry. Uncertainty has been adjusted accordingly.
