# basic oxygen furnace secondary metallurgy slag, for recovery to generic market for supplementary cementitious materials

Dataset: EcoSpold 2, unit process
Geography: RoW
Time period: 2020-01-01 to 2025-12-31
Technology level: current
Classification: ISIC rev.4 ecoinvent: 2394:Manufacture of cement, lime and plaster
Scenario: Business-as-Usual
System model: Substitution, consequential, long-term
Generated by: Avraam Symeonidis
Database: ecoinvent
isCopyrightProtected: true
accessRestrictedTo: 1

## General comment
This is a renaming activity. It's purpose is to link 'basic oxygen furnace secondary metallurgy slag, for recovery' to the 'market for supplementary cementitious materials'. This represents the share of basic oxygen furnace secondary metallurgy slag, for recovery that is recovered for use in cement making.

## Included activities start
Activity starts with the reception of 'basic oxygen furnace secondary metallurgy slag, for recovery'.

## Included activities end
Activity ends with the 'supplementary cementitious materials' being ready for transportation.

## Reference product
- basic oxygen furnace secondary metallurgy slag, for recovery: 1 kg; By-product classification Recyclable; CPC 39310: Slag, dross, scalings and other waste from the manufacture of iron or steel; lognormal variance with pedigree 0.1706, pedigree (5,5,1,5,5)
  properties: aluminium content 0.0530427, arsenic content 1.1591e-6, barium content 8.16088e-5, calcium content 0.312637, carbon allocation 0.000826813 kg, carbon content 0.000830968, carbon content, fossil 0.000830968, carbon content, non-fossil 0, chromium content 0.000889377, copper content 0.000110177, dry mass 0.995 kg, fluorine content 0.0129487, heating value, net 0 MJ, iron content 0.0199153, lead content 3.62172e-5, magnesium content 0.0427775, manganese content 0.00556519, molybdenum content 7.0884e-5, nickel content 6.01469e-5, oxygen content 0.476841, phosphorus content 0.000299524, potassium content 0.000137559, price 0 EUR2005, silicon content 0.0601451, sodium content 0.000167606, sulfur content 0.00614898, titanium content 0.00182329, vanadium content 0.000373201, water content 0.00502513, water in wet mass 0.005 kg, wet mass 1 kg, zinc content 0.000100723

## Inputs from technosphere
- supplementary cementitious materials: 0.000169181, 0.999831 kg (2 suppliers, which the file names only by identifier); sum of these 1 kg
  properties: dry mass 1 kg, price 0.075 EUR2005, wet mass 1 kg
