# treatment of waste cooking oil, purified, esterification

Dataset: EcoSpold 2, unit process
Geography: RoW
Time period: 1996-01-01 to 2022-12-31
Technology level: current
Classification: EcoSpold01Categories: biomass/fuels
Classification: ISIC rev.4 ecoinvent: 3830:Materials recovery
Scenario: Business-as-Usual
System model: Substitution, consequential, long-term
Generated by: Edgard Gnansounou
Published in: Jungbluth N. 2007
Database: ecoinvent
isCopyrightProtected: true

## General comment
Inventory refers to the production of 1 kg vegetable oil methyl ester (VOME), respectively glycerine, from purified waste cooking oil. The multioutput-process 'vegetable oil, from waste cooking oil, in esterification plant' delivers the co-products 'vegetable oil methyl ester, at esterification plant' and 'glycerine, from vegetable oil, at esterification plant'. Economic allocation with allocation factor of 87.1% to rape oil and 12.9% to glycerine. Allocation of CO2 emissions is done according to carbon balance.
Data from Quebec dataset have been added to this GLO dataset to reflect Quebec particularity of the technology and site location (non urban area).

## Included activities end
This process includes the esterification process of vegetable oil (from waste cooking oil) to methyl ester and glycerine, intermediate storage of the oil and products, treatment of specific wastewater effluents. System boundary is at the esterification plant.

## Geography
Data from different plants worldwide (incl. literature data)
Data from Quebec dataset have been added to this GLO dataset to reflect Quebec particularity of the technology and site location (non urban area).

## Technology
Typical vegetable oil esterification plant designed for vegetable oil methyl ester (VOME) production (for use in the vehicle fuels market), in the French context. Vegetable oil base-catalyzed transesterification.

## Time period
Data from 1996 to 2003, current technology for large scale biodiesel plants worldwide

## Parameters
- fraction, cooling water, cooling pond system, to air: 0.032 dimensionless; name fraction_CW_CP_to_air; lognormal variance with pedigree 0.0413, pedigree (2,3,1,3,1)
  Calculated based on literature value (Scown, C.D., 2011, Water Footprint of U.S. Transportation Fuels and supplying information of the article) (Vionnet, S., Quantis Water Database - Technical Report, 2012).
- fraction, cooling water, once-through system, to air: 0.004 dimensionless; name fraction_CW_OT_to_air; lognormal variance with pedigree 0.0413, pedigree (2,3,1,3,1)
  (same comment as for fraction, cooling water, cooling pond system, to air)
- fraction, cooling water, recirculating system, to air: 0.771 dimensionless; name fraction_CW_R_to_air; lognormal variance with pedigree 0.0413, pedigree (2,3,1,3,1)
  (same comment as for fraction, cooling water, cooling pond system, to air)
- fraction, cooling water, to air: 0.3875 dimensionless; name fraction_CW_to_air; = (0.5*fraction_CW_OT_to_air)+(0.5*fraction_CW_R_to_air); lognormal variance with pedigree 0.092025, pedigree (4,4,3,2,4)
  Calculated value based on literature value (see comments of the other parametres present in this dataset) and expert opinion. In the case when no industry/literature data are available about the type of cooling or directly fraction, cooling water, to air specific for the process a default assumption is applied. It is assumed that the once-through cooling system is used in 50% of all cases and recirculating system is used in another 50% of all cases.
- fraction, process water, to air: 0.205 dimensionless; lognormal variance with pedigree 0.092025, pedigree (4,4,3,2,4)
- fraction, tap water, to air: 0.205 dimensionless; lognormal variance with pedigree 0.092025, pedigree (4,4,3,2,4)
- quebec production volume: 4.03551e6 kg; name PV_Quebec
  Production volume of purified cooking oil treated in the Quebec dataset.

## Reference product
- used vegetable cooking oil, purified: -1 kg; name purifiedOil; By-product classification Recyclable; CPC 39120: Bran and other residues from the working of cereals or legumes; vegetable materials and vegetable waste, veget[…]
  Literature data & biodiesel producer
  EcoSpold01Location=FR
  production volume 3.33238e9 kg
    Data fron the "treatment of used vegetable cooking oil, purification, GLO" dataset.
  property carbon content, fossil 0.003
    The refined waste vegetable oil consists of 6.5% (wt.) of FAME and 93.5% (wt.) of triglycerides. The overall percentage weight of fossil carbon in the oil is 0.3% (wt.), corresponding to a 4.1% of fossil carbon in the 6.5% of FAME. The remaining carbon in the oil is biogenic carbon. (ecoinvent v2.2 report 17, pg 475)
  property carbon content, non-fossil 0.747
    (same comment as for used vegetable cooking oil, purified)
  property heating value, net 38.4 MJ
    Values is approximated from HHV from "vegetable oil, crude". Source: Radovanovic,M.; Zivanovic,T.; Stojiljkovic,D.; Jovanovic,V.; Jerinic,N.; Knezevic,S. et.al. Utilization of sunflower husk as a fuel for industrial boilers - 20 years experience. Proc. 5th Eur. Conf. on Industrial Furnaces&Boilers 2000,vol.2,p.221-233.
    Available at: https://phyllis.nl/Biomass/View/2152
  property price 0.362 EUR2005
    Temporary price data. Calculated as 90% of purchasers price based on: Assumed equal to palm oil
  properties: carbon allocation 0.75 kg, carbon content 0.75, dry mass 1 kg, water content 0, water in wet mass 0 kg, wet mass 1 kg

## Inputs from technosphere
- electricity, medium voltage: 0.00355399, 2.2295e-5, 6.55038e-6, 1.73716e-5, 5.79571e-5, 0.000122164, 7.14768e-5, 1.26723e-5, 1.2264e-5, 1.07154e-5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 kWh (47 suppliers, which the file names only by identifier); sum of these 0.041141 kWh; lognormal variance with pedigree 0.042, pedigree (1,1,5,5,1)
  EcoSpold01Location=FR
  Literature data & biodiesel producer
  Uncertainty: Literature data & biodiesel producer
- fatty acid methyl ester: -0.96936, -0.00333976 kg (2 suppliers, which the file names only by identifier); sum of these -0.9727 kg; lognormal variance with pedigree 0.0506, pedigree (5,5,1,5,1)
  EcoSpold01Location=FR
  production volume
    Calculated from the production volume of used vegetable cooking oil, purified in proportion to the respective output amounts.
  properties: carbon content, fossil 0.041, carbon content, non-fossil 0.732, dry mass 1 kg, heating value, net 37.2 MJ, price 0.817 EUR2005, wet mass 1 kg
  note on heating value, net: Based on literature, report 17, page 439. Jungbluth, N., Chudacoff, M., Dauriat, A., Dinkel, F., Doka, G., Faist Emmenegger, M., Gnansounou, E., Kljun, N., Schleiss, K., Spielmann, M., Stettler, C., Sutter, J. 2007: Life Cycle Inventories of Bioenergy. ecoinvent report No. 17, Swiss Centre for Life Cycle Inventories, Dübendorf, CH.
- glycerine: -0.1061 kg; lognormal variance with pedigree 0.056, pedigree (5,5,1,5,1)
  EcoSpold01Location=FR
  production volume
    (same comment as for fatty acid methyl ester)
  properties: carbon content, non-fossil 0.391304, dry mass 1 kg, heating value, net 18 MJ, price 0.792 EUR2005, wet mass 1 kg
  note on heating value, net: Based on literature, Report 17: Jungbluth, N., Chudacoff, M., Dauriat, A., Dinkel, F., Doka, G., Faist Emmenegger, M., Gnansounou, E., Kljun, N., Schleiss, K., Spielmann, M., Stettler, C., Sutter, J. 2007: Life Cycle Inventories of Bioenergy. ecoinvent report No. 17, Swiss Centre for Life Cycle Inventories, Dübendorf, CH.
- heat, district or industrial, natural gas: 0.00105528, 0.897505 MJ (2 suppliers, which the file names only by identifier); sum of these 0.89856 MJ; lognormal variance with pedigree 0.042, pedigree (1,1,5,5,1)
  Literature data & biodiesel producer
  EcoSpold01Location=RER
  Uncertainty: Literature data & biodiesel producer
  properties: heating value, net 1 MJ
- methanol: 0.1105 kg; lognormal variance with pedigree 0.042, pedigree (1,1,5,5,1)
  Literature data & biodiesel producer
  EcoSpold01Location=GLO
  Uncertainty: Literature data & biodiesel producer
  properties: carbon content, fossil 0.375, dry mass 1 kg, heating value, net 20 MJ, wet mass 1 kg
  note on heating value, net: Based on literature, page 533, Report 17: Jungbluth, N., Chudacoff, M., Dauriat, A., Dinkel, F., Doka, G., Faist Emmenegger, M., Gnansounou, E., Kljun, N., Schleiss, K., Spielmann, M., Stettler, C., Sutter, J. 2007: Life Cycle Inventories of Bioenergy. ecoinvent report No. 17, Swiss Centre for Life Cycle Inventories, Dübendorf, CH.
- municipal solid waste: -1.73491e-9, -9.59413e-10, -1.26532e-8, -1.31179e-8, -3.14801e-9, -1.06409e-9, -1.67715e-9, -2.47492e-10, -6.64704e-10, -3.39076e-9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 kg (38 suppliers, which the file names only by identifier); sum of these -1.39961e-6 kg; = 0.001*(-1/-0.8238)*PV_Quebec/PV_Ref; lognormal variance with pedigree 0.0052, pedigree (2,4,1,5,1)
  Adaptation of GLO dataset to reflect Quebec particularity. Calculated value = value of Quebec dataset (adapted for the difference in reference flows) * production volume of Quebec / production volume of GLO.
  production volume
    Calculated from production volume of reference product using the relative outputs.
  properties: carbon content, fossil 0.171549, carbon content, non-fossil 0.261655, dry mass 0.771 kg, heating value, net 11.74 MJ, water content 0.297017, wet mass 1 kg
  note on carbon content, fossil: MSW composition in tab 4.1, ecoinvent v2.2 report 13_I. C content referred to 1 kg DM
  note on heating value, net: Value taken from the general comment of the treatment dataset.
- phosphoric acid, industrial grade, without water, in 85% solution state: 0.0044768 kg; lognormal variance with pedigree 0.042, pedigree (1,1,5,5,1)
  EcoSpold01Location=RER
  Literature data & biodiesel producer
  Uncertainty: Literature data & biodiesel producer
  properties: dry mass 1 kg, wet mass 1 kg
- potassium hydroxide: 0.011046 kg; lognormal variance with pedigree 0.042, pedigree (1,1,5,5,1)
  (same comment as for heat, district or industrial, natural gas)
  properties: dry mass 0.856 kg, water content 0.168224, wet mass 1 kg
- sodium hydroxide, without water, in 50% solution state: 5.33715e-7 kg; = 0.00038133*(-1/-0.8238)*PV_Quebec/PV_Ref; lognormal variance with pedigree 0.0452, pedigree (2,4,5,5,1)
  (same comment as for municipal solid waste)
  properties: dry mass 1 kg, heating value, net 3.03 MJ, wet mass 1 kg
- sodium methoxide: 6.1583e-5 kg; = 0.044*(-1/-0.8238)*PV_Quebec/PV_Ref; lognormal variance with pedigree 0.0452, pedigree (2,4,5,5,1)
  (same comment as for municipal solid waste)
  properties: carbon content, fossil 0.222222, dry mass 1 kg, heating value, net 13.47 MJ, wet mass 1 kg
- sulfuric acid: 5.04757e-6 kg; = 0.0036064*(-1/-0.8238)*PV_Quebec/PV_Ref; lognormal variance with pedigree 0.0452, pedigree (2,4,5,5,1)
  (same comment as for municipal solid waste)
  properties: dry mass 1 kg, wet mass 1 kg
- tap water: 0.000392182, 0.00197139, 0.000731791, 0.000176364, 0.000257267, 0.00988927, 0.00284093 kg (7 suppliers, which the file names only by identifier); sum of these 0.0162592 kg; source Sheenhan, J. 1998; lognormal variance with pedigree 0.0546, pedigree (3,3,5,5,1)
  EcoSpold01Location=RER
  Literature, environmental report
  Calculated based on literature (Sheenhan, J., 18, An Overview of Biodiesel and Petroleum Diesel Life Cycles; Omni Tech International, 2010, Life Cycle Impact of Soybean Production and Soy Industrial Products), (Vionnet, S., Quantis Water Database - Technical Report, 2012). Assumed to have the same water use as "soybean methyl ester, at esterification plant/US". The process starts when refined vegetable oil enters the plant. It includes the processes: prepurification, deacidification, transesterification, destilation, etc. It is assumed that 95% of water use is allocated to cooling water and 5% of water is allocated as process water.
  Literature, environmental report
  Calculated based on literature (Sheenhan, J., 18, An Overview of Biodiesel and Petroleum Diesel Life Cycles; Omni Tech International, 2010, Life Cycle Impact of Soybean Production and Soy Industrial Products), (Vionnet, S., Quantis Water Database - Technical Report, 2012). Assumed to have the same water use as "soybean methyl ester, at esterification plant/US". The process starts when refined vegetable oil enters the plant. It includes the processes: prepurification, deacidification, transesterification, destilation, etc. It is assumed that 95% of water use is allocated to cooling water and 5% of water is allocated as process water.
  Uncertainty: Literature, environmental report
  properties: carbon content, fossil 0.00178991, dry mass 0.000337476 kg, water content 2962.17, wet mass 1 kg
  note on carbon content, fossil: Bicarbonate content is 2.93 mol/m3. CO2 content is 0.1 mol/m3 (ecoinvent v2.2 report 8, Tab 93.1).
- vegetable oil esterification facility: 9.0909e-10 unit; lognormal variance with pedigree 0.3521, pedigree (1,2,5,5,1)
  EcoSpold01Location=CH
  Calculation, according to feed capacity and lifetime of the plant
  Uncertainty: Calculation, according to feed capacity and lifetime of the plant
- wastewater, average: -6.04607e-5, -3.63335e-7 m3 (2 suppliers, which the file names only by identifier); sum of these -6.0824e-5 m3; lognormal variance with pedigree 0.09, pedigree (5,5,1,5,1)
  Calculation, to close mass balance of process
  EcoSpold01Location=CH
  Uncertainty: Calculation, to close mass balance of process
  production volume
    (same comment as for fatty acid methyl ester)
  properties: carbon content, non-fossil 0.194039, dry mass 0.346837 kg, mass concentration, TOC 0.1091 kg/m3, mass concentration, calcium 0.039453 kg/m3, mass concentration, chlorine 0.030031 kg/m3, mass concentration, hydrogen 0.013365 kg/m3, mass concentration, nitrogen 0.031015 kg/m3, mass concentration, oxygen 0.069824 kg/m3, mass concentration, sodium 0.06456 kg/m3, mass concentration, sulfur 0.015602 kg/m3, water content 2882.2, wet mass 1000 kg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
  note on carbon content, non-fossil: 0.0673 kg TOC/m3 (Tab A.17, ecoinvent v2.2 report 13_I). TOC was considered as Total Carbon.
- water, deionised: 6.36021e-7, 7.05267e-10 kg (2 suppliers, which the file names only by identifier); sum of these 6.36726e-7 kg; = 0.00045493*(-1/-0.8238)*PV_Quebec/PV_Ref; lognormal variance with pedigree 0.0452, pedigree (2,4,5,5,1)
  (same comment as for municipal solid waste)
  properties: wet mass 1 kg

## Inputs from nature
- Carbon dioxide, in air [natural resource, in air]: 0.13558 kg; lognormal variance with pedigree 0.042, pedigree (1,1,5,5,1)
  Calculation, to close carbon balance
  Uncertainty: Calculation, to close carbon balance
- Water, cooling, unspecified natural origin [natural resource, in water]: 0.000308925 m3; name water_cooling_UNO_input; source Sheenhan, J. 1998; lognormal variance with pedigree 0.0932, pedigree (2,3,5,5,4)
  Calculated based on literature (Sheenhan, J., 18, An Overview of Biodiesel and Petroleum Diesel Life Cycles; Omni Tech International, 2010, Life Cycle Impact of Soybean Production and Soy Industrial Products), (Vionnet, S., Quantis Water Database - Technical Report, 2012). Assumed to have the same water use as "soybean methyl ester, at esterification plant/US". The process starts when refined vegetable oil enters the plant. It includes the processes: prepurification, deacidification, transesterification, destilation, etc. The process ends when methyl ester leaves the plant. It is assumed that 95% of water use is allocated to cooling water and 5% of water is allocated as process water.
  property carbon content, fossil 0.0104329; name C_content_fossil
  property carbon content, non-fossil 0; name C_content_non_fossil
  property dry mass 0.1101 kg; name DM
  property water content 9081.65; name water_content
  property water in wet mass 999.89 kg; name WWM

## Emissions to nature
- Carbon dioxide, non-fossil [air, urban air close to ground]: 0.2155 kg; lognormal variance with pedigree 0.042, pedigree (1,1,5,5,1)
  Calculation, to close carbon balance
  Uncertainty: Calculation, to close carbon balance
- Water [air, unspecified]: 0.000123041 m3; name water_to_air_unspecified; lognormal variance with pedigree 0.0827, pedigree (2,2,5,5,1)
  Calculated value based on literature values and expert opinion. See comments in the parametres' comment field.
  property fraction, origin: fresh water 0.0270895; name fraction_origin_fresh_water
  property fraction, origin: salt water 0; name fraction_origin_salt_water
  property fraction, origin: unspecified 0.97291; name fraction_origin_unspecified
- Water [water, unspecified]: 0.000202142 m3; name water_to_water_unspecified; lognormal variance with pedigree 0.0827, pedigree (2,2,5,5,1)
  (same comment as for Water)
  property fraction, origin: fresh water 0.0639453; name fraction_origin_fresh_water_Ww
  property fraction, origin: salt water 0; name fraction_origin_salt_water_Ww
  property fraction, origin: unspecified 0.936055; name fraction_origin_unspecified_Ww

## Sampling procedure
Cross-checking of various literature sources from 1998 to 2006

## Extrapolations
none This dataset has been copied from an original dataset covering the geography CH. The uncertainty has been adjusted accordingly.
Data from Quebec dataset have been added to this GLO dataset to reflect Quebec particularity of the technology.

## Review by Niels Jungbluth 2006-08-15
Passed.
none
