# heat and power co-generation, natural gas, 160kW electrical, Jakobsberg

Dataset: EcoSpold 2, unit process
Geography: CH
Time period: 2000-01-01 to 2022-12-31
Technology level: current
Classification: EcoSpold01Categories: natural gas/cogeneration
Classification: ISIC rev.4 ecoinvent: 3530:Steam and air conditioning supply
Tags: with true value; ConvertedDataset
Scenario: Business-as-Usual
System model: Substitution, consequential, long-term
Generated by: [System]
Published in: Heck, T. 2007
Database: ecoinvent
isCopyrightProtected: true

## General comment
The multioutput-process 'natural gas, burned in cogen 160kWe Jakobsberg, allocation exergy' delivers the coproducts 'electricity, at cogen 160kWe Jakobsberg, allocation exergy' and 'heat, at cogen 160kWe Jakobsberg, allocation exergy'. The exergy allocation is the allocation scheme suggested to be used within ecoinvent (e.g. in electricity mixes).
[This dataset was already contained in the ecoinvent database version 2. It was not individually updated during the transfer to ecoinvent version 3. Life Cycle Impact Assessment results may still have changed, as they are affected by changes in the supply chain, i.e. in other datasets. This dataset was generated following the ecoinvent quality guidelines for version 2. It may have been subject to central changes described in the ecoinvent version 3 change report (http://www.ecoinvent.org/database/ecoinvent-version-3/reports-of-changes/), and the results of the central updates were reviewed extensively. The changes added e.g. consistent water flows and other information throughout the database. The documentation of this dataset can be found in the ecoinvent reports of version 2, which are still available via the ecoinvent website. The change report linked above covers all central changes that were made during the conversion process.]

## Included activities end
The module includes fuel input, infrastructure, emissions to air, and substances needed for operation.

## Geography
Efficiencies refer to a specific plant in Switzerland.

## Technology
Specific cogeneration unit installed in Switzerland.

## Parameters
- scaling factor: 2.04082 dimensionless

## Reference product
- heat, central or small-scale, natural gas, Jakobsberg: 1 MJ; = 0.49 * scaling_factor; By-product classification allocatable product; CPC 17300: Steam and hot water
  EcoSpold01Location=CH
  Amount was scaled to 1.
  production volume 5.23e8 MJ
    Literature value/extrapolation.
    A relation of 1:1000 between the CH and the GLO dataset is assumed for extrapolation of the value to the global dataset.
  property Corresponding fuel use 1.85934 MJ; name fuel_use; = 0.025641*35.532/0.49
    Lower heating value of the fuel input related to the heat/electricity output
  property exergy 0.169678 MJ; name exergy
    allocation factor for electricity (=1) vs. heat, where heat is calculated as the termodynamic mean temperature Tm = (Tfeed-Treturn)/ln(Tfeed/Treturn), relative to the application temperature (Tu, typically = 293 K), i.e. (Tm-Tu)/Tm
  property price 0.01 EUR2005
    Temporary price data. Calculated as 90% of purchasers price based on: Average European district heat price from Ecoheatcool and Euroheat 2005-2006, Ecoheat Work package 1: The European heat market. Final report. http://www.solarthermalworld.org/files/Ecoheatcool%20WP1%20Web.pdf?download
  property true value relation 0.169678; name true_value_relation
    property to calculate "true value" from
  properties: EcoSpold01Allocation_undefined_1 24, EcoSpold01Allocation_undefined_10 24, EcoSpold01Allocation_undefined_11 24, EcoSpold01Allocation_undefined_12 24, EcoSpold01Allocation_undefined_13 24, EcoSpold01Allocation_undefined_14 24, EcoSpold01Allocation_undefined_15 24, EcoSpold01Allocation_undefined_16 24, EcoSpold01Allocation_undefined_18 100, EcoSpold01Allocation_undefined_2 24, EcoSpold01Allocation_undefined_3 0, EcoSpold01Allocation_undefined_4 100, EcoSpold01Allocation_undefined_5 24, EcoSpold01Allocation_undefined_6 24, EcoSpold01Allocation_undefined_7 24, EcoSpold01Allocation_undefined_8 24, EcoSpold01Allocation_undefined_9 24, carbon allocation 0 kg, carbon content 0

## Inputs from technosphere
- electricity, low voltage: -0.153061 kWh; name electricity; = 0.075 * scaling_factor
  EcoSpold01Location=CH
  Amount was scaled to the amount of reference product.
  production volume
    Calculated value
  property exergy 3.6 MJ; name electricity_exergy
  property true value relation 3.6; name electricity_true_value_relation
  properties: EcoSpold01Allocation_undefined_1 76, EcoSpold01Allocation_undefined_10 76, EcoSpold01Allocation_undefined_11 76, EcoSpold01Allocation_undefined_12 76, EcoSpold01Allocation_undefined_13 76, EcoSpold01Allocation_undefined_14 76, EcoSpold01Allocation_undefined_15 76, EcoSpold01Allocation_undefined_16 76, EcoSpold01Allocation_undefined_17 100, EcoSpold01Allocation_undefined_2 76, EcoSpold01Allocation_undefined_3 100, EcoSpold01Allocation_undefined_5 76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
  note on exergy: allocation factor for electricity (=1) vs. heat, where heat is calculated as the termodynamic mean temperature Tm = (Tfeed-Treturn)/ln(Tfeed/Treturn), relative to the application temperature (Tu, typically = 293 K), i.e. (Tm-Tu)/Tm
- heat and power co-generation unit, 160kW electrical, common components for heat+electricity: 1.02041e-8 unit; = 5E-09 * scaling_factor; lognormal variance with pedigree 0.04, pedigree (1,1,5,1,1)
  Amount was scaled to the amount of reference product.
  EcoSpold01Location=RER
- heat and power co-generation unit, 160kW electrical, components for electricity only: 1.02041e-8 unit; = 5E-09 * scaling_factor; lognormal variance with pedigree 0.04, pedigree (1,1,5,1,1)
  Amount was scaled to the amount of reference product.
  EcoSpold01Location=RER
- heat and power co-generation unit, 160kW electrical, components for heat only: 1.02041e-8 unit; = 5E-09 * scaling_factor; lognormal variance with pedigree 0.04, pedigree (1,1,5,1,1)
  EcoSpold01Location=RER
  Amount was scaled to the amount of reference product.
- lubricating oil: 6.12245e-5 kg; = 3E-05 * scaling_factor; lognormal variance with pedigree 0.05, pedigree (1,1,5,1,1)
  EcoSpold01Location=RER
  vender information
  Amount was scaled to the amount of reference product.
  properties: carbon content, fossil 0.75, dry mass 1 kg, heating value, net 40.2 MJ, wet mass 1 kg
  note on carbon content, fossil: Lubricating oil is produced from diesel. C-content/dry mass of fats and oils considered 75%, from: ecoinvent v2.2 report, n 15a, pg 40
  note on heating value, net: Literature value, Source: IPCC 2006, 2006 IPCC Guidelines for National Greenhouse Gas Inventories, Prepared by the National Greenhouse Gas Inventories Programme, Eggleston H.S., Buendia L., Miwa K., Ngara T. and Tanabe K. (eds). Published: IGES, Japan
- natural gas, low pressure: 0.0523286 m3; = 0.0256410256410256 * scaling_factor; lognormal variance with pedigree 0.04, pedigree (1,1,5,1,1)
  Amount was scaled to the amount of reference product.
  EcoSpold01Location=CH
  properties: carbon content, fossil 0.695187, dry mass 1 kg, heating value, gross 39 MJ, heating value, net 36 MJ, wet mass 1 kg
  note on carbon content, fossil: C content considered the same as in high pressure (consumption mix)
  note on heating value, net: Literature value, Source: Christoph Meili;Niels Jungbluth;Maresa Bussa (2021) Life cycle inventories of crude oil and natural gas extraction. ESU-services Ltd. commissioned by BAFU & VSG, Schaffhausen, Switzerland, http://esu-services.ch/data/public-lci-reports/
- waste mineral oil: -6.12245e-5 kg; name waste_min_oil; = 3E-05 * scaling_factor; lognormal variance with pedigree 0.12, pedigree (1,1,1,1,1)
  rough estimate
  Amount was scaled to the amount of reference product.
  EcoSpold01Location=CH
  production volume
    Calculated value
  properties: carbon content, fossil 0.864444, dry mass 0.9 kg, heating value, net 34.7 MJ, water content 0.111111, wet mass 1 kg
  note on carbon content, fossil: Tab A.6, ecoinvent v2.2 report 13_I. C content has been calculated after data in the tables, and then referred to 1 kg DM
  note on heating value, net: Value taken from the general comment of the treatment dataset.

## Emissions to nature
- Carbon dioxide, fossil [air, urban air close to ground]: 0.114286 kg; = 0.056 * scaling_factor; lognormal variance with pedigree 0.04, pedigree (1,1,5,1,1)
  composition of natural gas
  Amount was scaled to the amount of reference product.
- Carbon monoxide, fossil [air, urban air close to ground]: 9.79592e-5 kg; = 4.8E-05 * scaling_factor; lognormal variance with pedigree 0.16, pedigree (1,1,5,1,1)
  estimate based on different references
  Amount was scaled to the amount of reference product.
- Dinitrogen monoxide [air, urban air close to ground]: 5.10204e-6 kg; = 2.5E-06 * scaling_factor; lognormal variance with pedigree 0.34, pedigree (1,1,5,1,1)
  rough estimate
  Amount was scaled to the amount of reference product.
- Methane, fossil [air, urban air close to ground]: 4.69388e-5 kg; = 2.3E-05 * scaling_factor; lognormal variance with pedigree 0.34, pedigree (1,1,5,1,1)
  (same comment as for Carbon monoxide, fossil)
- NMVOC, non-methane volatile organic compounds [air, urban air close to ground]: 4.08163e-6 kg; = 2E-06 * scaling_factor; lognormal variance with pedigree 0.34, pedigree (1,1,5,1,1)
  (same comment as for Carbon monoxide, fossil)
- Nitrogen oxides [air, urban air close to ground]: 3.06122e-5 kg; = 1.5E-05 * scaling_factor; lognormal variance with pedigree 0.16, pedigree (1,1,5,1,1)
  (same comment as for Carbon monoxide, fossil)
- Particulate Matter, < 2.5 um [air, urban air close to ground]: 3.06122e-7 kg; = 1.5E-07 * scaling_factor; lognormal variance with pedigree 0.16, pedigree (1,1,5,1,1)
  (same comment as for Carbon monoxide, fossil)
- Platinum [air, urban air close to ground]: 1.42857e-11 kg; = 7E-12 * scaling_factor; lognormal variance with pedigree 1.37, pedigree (1,1,5,1,1)
  (Artelt et al. 2000)
  Amount was scaled to the amount of reference product.
- Sulfur dioxide [air, urban air close to ground]: 1.12245e-6 kg; = 5.5E-07 * scaling_factor; lognormal variance with pedigree 0.04, pedigree (1,1,5,1,1)
  composition of natural gas
  Amount was scaled to the amount of reference product.

## Sampling procedure
Emission measurements of operator, literature. Efficiencies from operator data.

## Review by Gerald Rebitzer (obsolete) 2003-07-03
passed

## Review by Emilia Moreno Ruiz 2012-04-16
calculation of fuel use property.
