# treatment of sewage sludge, 70% water, WWT, WW, average, municipal incineration FAE

Dataset: EcoSpold 2, unit process
Geography: CH
Time period: 2006-01-01 to 2022-12-31
Technology level: current
Classification: ISIC rev.4 ecoinvent: 3821:Treatment and disposal of non-hazardous waste
Scenario: Business-as-Usual
System model: Substitution, consequential, long-term
Generated by: Nikolia Stoikou
Database: ecoinvent
isCopyrightProtected: true

## General comment
The process represents the treatment of a waste (sewage sludge) that is exclusively produced from another waste treatment. Municipal incineration is the controlled combustion of a waste. Sewage sludge is generated in the wastewater treatment of 'wastewater, average'. Recommended use of this dataset: to be used within the specific chain of treatments for 'wastewater, average'. Share of biogenic carbon in the sludge: 97.426%.

## Included activities start
The activity starts with the waste being available at the gate of the treatment facility. Collection and transportation of the waste to the treatment plant is not included.

## Included activities end
The activity ends with the waste being treated and waste-specific emissions from the incineration process are released to the environment (air and water).

## Geography
Modelling parameters affecting the treatment technology are specific to this geography and to the technology mix encountered in Switzerland in 2012.

## Technology
The waste is treated in the incineration plant with flue gas cleaning. Incineration is the controlled combustion of a waste. Auxiliary material consumption for this step of air pollution control (APC) are included in the process. Infrastructure is also included in the process. Air polution control includes, electrostatic precipitator for fly ash (ESP), wet flue gas scrubber and 25% SNCR , 42.77% SCR-high dust , 32.68% SCR-low dust -DeNOx facilities and 0% without DeNOx (weighted according to mass of burnt waste). Efficiency of iron scrap separation from slag : 58%. Efficiency of aluminium scrap separation from slag : 31%. Efficiency of copper scrap separation from slag : 31%. The technology mix for this dataset includes a filter ash treatment (FLUWA) of a share of 46.22%. Gross electric efficiency technology mix 15.84% and Gross thermal efficiency technology mix 28.51%

## Reference product
- sewage sludge, 70% water, WWT, WW, average: -1 kg; By-product classification Waste; CPC 39920: Sewage sludge
  production volume 1.63049e8 kg
    In Switzerland, 90% of the sewage sludge is disposed through municipal incineration and 10% in landfarming. Therefore, the PV for this reference product is calculated based on the production of sewage sludge of the wastewater treatment process (Doka G.,2021. A model for composition-specific life cycle inventories of regionalised wastewater fates, Zurich, Switzerland. http://www.doka.ch/publications.htm)
  properties: aluminium content 4.12498e-5, antimony content 4.6192e-6, arsenic content 3.85647e-6, barium content 0.000398112, beryllium content 2.5204e-7, boron content 3.72913e-5, cadmium content 2.042e-6, calcium content 0.0684358, carbon allocation 0.0911554 kg, carbon content 0.303851, carbon content, fossil 0.00782135, carbon content, non-fossil 0.29603, chromium content 5.46607e-5, cobalt content 1.00668e-5, copper content 0.000428909, dry mass 0.3 kg, heating value, gross 11.4861 MJ, heating value, net 5.53493 MJ, hydrogen content 0.0413075, iron content 0.0533099, lead content 5.14255e-5, magnesium content 0.00541326, manganese content 0.000461279, mercury content 4.58448e-7, molybdenum content 1.04336e-5, nickel content 2.07364e-5, nitrogen content 0.0347053, oxygen content 0.437351, phosphorus content 0.0327866, potassium content 0.005493, price 0 EUR2005, scandium content 6.73454e-6, selenium content 4.41204e-6, silicon content 0.00450158, silver content 1.47859e-5, sodium content 0.00431077, strontium content 0.000439705, sulfur content 0.00522365, thallium content 3.18937e-7, tin content 3.14039e-5, titanium content 0.000195562, tungsten content 2.17649e-6, vanadium content 3.66558e-5, water content 2.33333, water in wet mass 0.7 kg, wet mass 1 kg, zinc content 0.00105314

## Inputs from technosphere
- ammonia, anhydrous, liquid: 0.00122033 kg; lognormal variance with pedigree 0.72351, pedigree (1,1,4,1,1)
  Input to DeNOx stage (100% NH3).
  Uncertainty: uncertainty calculated from uncertainty in average DeNOx input, uncertainty in the share of thermal NOx, uncertainty of nitrogen content in average municipal waste and the uncertainty in nitrogen content in *this* waste.
  properties: dry mass 1 kg, wet mass 1 kg
- bottom ash, MSWI[F]-WWT, WW, average: -0.0918752 kg; lognormal variance with pedigree 0.0097929, pedigree (1,1,1,1,1)
  waste-specific bottom ash from the incineration of this waste
  Uncertainty: uncertainty is calculated from uncertainties in waste composition and transfer coefficients in incinerator
  production volume
    Calculated from the production volume of the reference product in proportion to the respective output amounts.
  properties: calcium content 0.220786, dry mass 0.838084 kg, iron content 0.204274, magnesium content 0.0195591, oxygen content 0.372431, phosphorus content 0.115073, potassium content 0.0120323, silicon content 0.0166554, sodium content 0.00887883, sulfur content 0.0139027, water content 0.193198, wet mass 1 kg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
- cationic resin: 6.97047e-7 kg; lognormal variance with pedigree 1.0534, pedigree (1,1,4,1,1)
  auxiliary input for mercury removal in filter ash treatment (FLUWA).
  Uncertainty: uncertainty calculated from uncertainty in of transfer coefficients in the incinerator, and the uncertainty of the waste composition of this waste
  properties: carbon content, fossil 0.521606, dry mass 0.5 kg, heating value, net 6.68 MJ, water content 1, wet mass 1 kg
- chemical, inorganic: 1.85494e-5 kg; lognormal variance with pedigree 0.0124303, pedigree (1,1,4,1,1)
  auxiliary inputs for the wastewater treatment stage of the incinerator plant. Proxy for Polyelectrolyte.
  Uncertainty: uncertainty calculated from uncertainty in average Polyelectrolyte input, of transfer coefficients in the incinerator, and the uncertainty of the waste composition of this waste
  properties: carbon content, fossil 0.003, dry mass 1 kg, wet mass 1 kg
- chromium oxide, flakes: 1.56033e-6 kg; lognormal variance with pedigree 1.135, pedigree (1,1,4,1,1)
  Input to DeNOx stage. Active component in SCR catalyst (vanadium pentoxide, V2O5), here approximated with the available chromium trioxide.
  Uncertainty: uncertainty calculated from uncertainty in average DeNOx input, uncertainty in the share of thermal NOx, uncertainty of nitrogen content in average municipal waste and the uncertainty in nitrogen content in *this* waste.
  properties: dry mass 1 kg, wet mass 1 kg
- electricity, for reuse in municipal waste incineration only: -0.0175274 kWh; lognormal variance with pedigree 1.0632, pedigree (1,1,1,1,1)
  net electricity generated from this waste and used in internal MSWI plant energy redistribution.
  Uncertainty: uncertainty is calculated from uncertainties in waste composition and uncertainties in energy efficiency and the uncertainty in internal energy demand
  production volume
    (same comment as for bottom ash, MSWI[F]-WWT, WW, average)
  properties: price 0.1 EUR2005
- heat, district or industrial, natural gas: 0.2282 MJ; lognormal variance with pedigree 0.72351, pedigree (1,1,4,1,1)
  Input to DeNOx stage, to heat up flue gas in low-dust SCR.
  Uncertainty: uncertainty calculated from uncertainty in average DeNOx input, uncertainty in the share of thermal NOx, uncertainty of nitrogen content in average municipal waste and the uncertainty in nitrogen content in *this* waste.
  properties: heating value, net 1 MJ
- heat, for reuse in municipal waste incineration only: -0.354924 MJ; lognormal variance with pedigree 0.20269, pedigree (1,1,1,1,1)
  net useful heat generated from this waste and used in internal MSWI plant energy redistribution.
  Uncertainty: uncertainty is calculated from uncertainties in waste composition and uncertainties in energy efficiency and the uncertainty in internal energy demand
  production volume
    (same comment as for bottom ash, MSWI[F]-WWT, WW, average)
  properties: price 0.0106 EUR2005
- hydrochloric acid, without water, in 30% solution state: 0.000245115 kg; lognormal variance with pedigree 0.0104971, pedigree (1,1,4,1,1)
  auxiliary inputs for the wastewater treatment stage of the incinerator plant.
  Uncertainty: uncertainty calculated from uncertainty in average HCl input, of transfer coefficients in the incinerator, and the uncertainty of the waste composition of this waste
  properties: dry mass 1 kg, heating value, net 3.32 MJ, wet mass 1 kg
- hydrogen peroxide, without water, in 50% solution state: 0.000611454 kg; lognormal variance with pedigree 0.0106418, pedigree (1,1,4,1,1)
  auxiliary oxidising agent for filter ash treatment (FLUWA).
  Uncertainty: uncertainty calculated from uncertainty in of transfer coefficients in the incinerator, and the uncertainty of the waste composition of this waste
  properties: dry mass 1 kg, heating value, net 7.13 MJ, wet mass 1 kg
- iron (III) chloride, without water, in 40% solution state: 1.14635e-5 kg; lognormal variance with pedigree 0.077139, pedigree (1,1,4,1,1)
  auxiliary inputs for the wastewater treatment stage of the incinerator plant.
  Uncertainty: uncertainty calculated from uncertainty in average FeCl3 input, of transfer coefficients in the incinerator, and the uncertainty of the waste composition of this waste
  properties: dry mass 1 kg, wet mass 1 kg
- metalliferous hydroxide sludge: -0.00436966 kg; lognormal variance with pedigree 0.0057443, pedigree (1,1,1,1,1)
  Metalliferous hydroxide sludge/zinc concentrate from filter ash leaching (FLUWA).
  Uncertainty: uncertainty is calculated from uncertainties in waste composition and transfer coefficients to filter ash in incinerator and the uncertainty of the transfer coefficients of the FLUWA process.
  production volume
    (same comment as for bottom ash, MSWI[F]-WWT, WW, average)
  properties: calcium content 0.189574, chlorine content 0.176087, dry mass 0.25 kg, fluorine content 0.005, oxygen content 0.46553, phosphorus content 0.176729, potassium content 0.00959517, sodium content 0.00972334, sulfur content 0.0882163, water content 3, wet mass 1 kg, zinc content 0.0510076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
  note on chlorine content: Calculated as a production volume weighted average of properties of all the metalliferous hydroxide sludge products produced in the database.
- municipal waste incineration facility: 2.5e-10 unit
  Infrastructure demands per kilogram incinerated waste.
- residues, MSWI[F]-WWT, WW, average: -0.00884982 kg; lognormal variance with pedigree 0.0030871, pedigree (1,1,1,1,1)
  waste-specific incineration residues (fly ash + scrubber sludge) from the incineration of this waste
  Uncertainty: uncertainty is calculated from uncertainties in waste composition and transfer coefficients in incinerator
  production volume
    (same comment as for bottom ash, MSWI[F]-WWT, WW, average)
  properties: calcium content 0.32405, carbon content, non-fossil 0.00812862, dry mass 1 kg, iron content 0.0296129, magnesium content 0.0121052, oxygen content 0.369662, phosphorus content 0.0867938, potassium content 0.0578913, sodium content 0.0445249, sulfur content 0.0349427, wet mass 1 kg, zinc content 0.0135135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
- sodium hydroxide, without water, in 50% solution state: 0.000740078 kg; lognormal variance with pedigree 0.0168273, pedigree (1,1,4,1,1)
  auxiliary inputs for the flue gas treatment stage of the incinerator plant, and partially in the filter ash treatment (FLUWA).
  Uncertainty: uncertainty calculated from uncertainty in average NaOH input, of transfer coefficients in the incinerator, and the uncertainty of the waste composition of this waste
  properties: dry mass 1 kg, heating value, net 3.03 MJ, wet mass 1 kg
- spent activated carbon with mercury: -7.33734e-7 kg; lognormal variance with pedigree 1.0454, pedigree (1,1,1,1,1)
  Spent ion exchanger charged with mercury, from FLUWA filter ash treatment, approximated here with Spent activated carbon with mercury, deposited undergound in a polyethylene Big Bag.
  Uncertainty: uncertainty calculated from uncertainty in of transfer coefficients in the incinerator, and the uncertainty of the waste composition of this waste.
  production volume
    (same comment as for bottom ash, MSWI[F]-WWT, WW, average)
  properties: carbon content, fossil 0.6, dry mass 1 kg, heating value, net 18.18 MJ, wet mass 1 kg
- titanium dioxide: 7.64564e-5 kg; lognormal variance with pedigree 1.135, pedigree (1,1,4,1,1)
  Input to DeNOx stage (TiO2 catalyst carrier)
  Uncertainty: uncertainty calculated from uncertainty in average DeNOx input, uncertainty in the share of thermal NOx, uncertainty of nitrogen content in average municipal waste and the uncertainty in nitrogen content in *this* waste.
  properties: dry mass 1 kg, wet mass 1 kg
- triazine-compound, unspecified: 1.31118e-6 kg; lognormal variance with pedigree 0.97878, pedigree (1,1,4,1,1)
  auxiliary inputs for the wastewater treatment stage of the incinerator plant. Proxy for (pure) Trisodium-trimercapto-s-triazine (CAS 17766-26-6), used as 15% diluted solution, aka TMT15.
  Uncertainty: uncertainty calculated from uncertainty in average TMT15 input, of transfer coefficients in the incinerator, and the uncertainty of the waste composition of this waste
  properties: carbon content, fossil 0.628, dry mass 1 kg, wet mass 1 kg
- water, decarbonised: 0.219902 kg; lognormal variance with pedigree 0.077139, pedigree (1,1,4,1,1)
  Incinerator process water used in flue gas scrubber stage.
  Uncertainty: uncertainty calculated from uncertainty in average water input, and the uncertainty of the waste composition of this waste
  properties: wet mass 1 kg

## Inputs from nature
- Oxygen [natural resource, in air]: 0.531409 kg; lognormal variance with pedigree 0.030525, pedigree (1,1,4,1,1)
  oxygen from ambient air needed to combust and oxidise this waste. Net demand, i.e. without O2 leaving the plant in flue gas uncombusted.
  Uncertainty: uncertainty is calculated from uncertainties in waste composition and transfer coefficients to flue gas and solid residues in incinerator

## Emissions to nature
- Aluminium III [air, urban air close to ground]: 1.00895e-11 kg; lognormal variance with pedigree 0.43244, pedigree (1,1,4,1,1)
  Emission to air from waste composition and incinerator transfer coefficients.
  Uncertainty: uncertainty is calculated from uncertainties in waste composition and transfer coefficients in incinerator
- Ammonia [air, urban air close to ground]: 1.43479e-6 kg; lognormal variance with pedigree 0.78825, pedigree (1,1,4,1,1)
  Nitrogen species emitted to air after DeNOx stage.
  Uncertainty: uncertainty calculated from uncertainty in average N-emissions and uncertainty in the share of thermal NOx and the uncertainty in nitrogen content in *this* waste.
- Antimony ion [air, urban air close to ground]: 1.11007e-12 kg; lognormal variance with pedigree 0.65731, pedigree (1,1,4,1,1)
  (same comment as for Aluminium III)
- Arsenic ion [air, urban air close to ground]: 9.06262e-9 kg; lognormal variance with pedigree 0.67173, pedigree (1,1,4,1,1)
  (same comment as for Aluminium III)
- Barium II [air, urban air close to ground]: 4.68785e-7 kg; lognormal variance with pedigree 0.24562, pedigree (1,1,4,1,1)
  (same comment as for Aluminium III)
- Benzene [air, urban air close to ground]: 4.46578e-8 kg; lognormal variance with pedigree 0.062925, pedigree (1,1,4,1,1)
  Incomplete combustion product emitted to air.
  Uncertainty: uncertainty calculated from uncertainty in average operation emissions, and the uncertainty of the flue gas volume from this waste.
- Benzene, hexachloro- [air, urban air close to ground]: 9.33772e-11 kg; lognormal variance with pedigree 0.062925, pedigree (1,1,4,1,1)
  (same comment as for Benzene)
- Benzene, pentachloro- [air, urban air close to ground]: 2.35942e-10 kg; lognormal variance with pedigree 0.062925, pedigree (1,1,4,1,1)
  (same comment as for Benzene)
- Benzo(a)pyrene [air, urban air close to ground]: 9.9378e-13 kg; lognormal variance with pedigree 0.34709, pedigree (1,1,4,1,1)
  (same comment as for Benzene)
- Cadmium II [air, urban air close to ground]: 3.12247e-10 kg; lognormal variance with pedigree 0.83917, pedigree (1,1,4,1,1)
  (same comment as for Aluminium III)
- Calcium [air, urban air close to ground]: 0.000161574 kg; lognormal variance with pedigree 0.034305, pedigree (1,1,4,1,1)
  (same comment as for Aluminium III)
- Carbon dioxide, fossil [air, urban air close to ground]: 0.00854863 kg; lognormal variance with pedigree 0.059791, pedigree (1,1,4,1,1)
  (same comment as for Aluminium III)
- Carbon dioxide, non-fossil [air, urban air close to ground]: 0.323557 kg; lognormal variance with pedigree 0.059791, pedigree (1,1,4,1,1)
  (same comment as for Aluminium III)
- Carbon monoxide, fossil [air, urban air close to ground]: 1.95406e-6 kg; lognormal variance with pedigree 0.71026, pedigree (1,1,4,1,1)
  (same comment as for Benzene)
- Carbon monoxide, non-fossil [air, urban air close to ground]: 7.39591e-5 kg; lognormal variance with pedigree 0.71026, pedigree (1,1,4,1,1)
  (same comment as for Benzene)
- Chromium III [air, urban air close to ground]: 1.43191e-8 kg; lognormal variance with pedigree 0.43244, pedigree (1,1,4,1,1)
  (same comment as for Aluminium III)
- Cobalt II [air, urban air close to ground]: 5.4925e-9 kg; lognormal variance with pedigree 0.58574, pedigree (1,1,4,1,1)
  (same comment as for Aluminium III)
- Copper ion [air, urban air close to ground]: 1.17852e-8 kg; lognormal variance with pedigree 0.27606, pedigree (1,1,4,1,1)
  (same comment as for Aluminium III)
- Cyanide [air, urban air close to ground]: 3.33616e-5 kg; lognormal variance with pedigree 0.84679, pedigree (1,1,4,1,1)
  (same comment as for Ammonia)
- Dinitrogen monoxide [air, urban air close to ground]: 0.000155285 kg; lognormal variance with pedigree 0.84679, pedigree (1,1,4,1,1)
  (same comment as for Ammonia)
- Dioxins, measured as 2,3,7,8-tetrachlorodibenzo-p-dioxin [air, urban air close to ground]: 8.93096e-14 kg; lognormal variance with pedigree 0.34709, pedigree (1,1,4,1,1)
  (same comment as for Benzene)
- Heat, waste [air, urban air close to ground]: 2.51734 MJ; lognormal variance with pedigree 0.056571, pedigree (1,1,4,1,1)
  Waste heat generated from heating value of this waste plus any electricity required to process it.
  Uncertainty: uncertainty is calculated from uncertainties in waste composition and uncertainties in energy efficiency and the uncertainty in internal energy demand
- Iron ion [air, urban air close to ground]: 2.86619e-8 kg; lognormal variance with pedigree 0.16593, pedigree (1,1,4,1,1)
  (same comment as for Aluminium III)
- Lead II [air, urban air close to ground]: 1.27101e-9 kg; lognormal variance with pedigree 0.46664, pedigree (1,1,4,1,1)
  (same comment as for Aluminium III)
- Magnesium [air, urban air close to ground]: 1.71293e-6 kg; lognormal variance with pedigree 0.064039, pedigree (1,1,4,1,1)
  (same comment as for Aluminium III)
- Manganese II [air, urban air close to ground]: 2.64281e-8 kg; lognormal variance with pedigree 0.2699, pedigree (1,1,4,1,1)
  (same comment as for Aluminium III)
- Mercury II [air, urban air close to ground]: 3.89961e-9 kg; lognormal variance with pedigree 1.0597, pedigree (1,1,4,1,1)
  (same comment as for Aluminium III)
- Methane, fossil [air, urban air close to ground]: 1.72429e-8 kg; lognormal variance with pedigree 0.062925, pedigree (1,1,4,1,1)
  (same comment as for Benzene)
- Methane, non-fossil [air, urban air close to ground]: 6.52625e-7 kg; lognormal variance with pedigree 0.062925, pedigree (1,1,4,1,1)
  (same comment as for Benzene)
- Molybdenum VI [air, urban air close to ground]: 4.11851e-9 kg; lognormal variance with pedigree 0.54327, pedigree (1,1,4,1,1)
  (same comment as for Aluminium III)
- NMVOC, non-methane volatile organic compounds [air, urban air close to ground]: 2.03237e-6 kg; lognormal variance with pedigree 0.062925, pedigree (1,1,4,1,1)
  (same comment as for Benzene)
- Nickel II [air, urban air close to ground]: 7.81488e-9 kg; lognormal variance with pedigree 0.45291, pedigree (1,1,4,1,1)
  (same comment as for Aluminium III)
- Nitrogen oxides [air, urban air close to ground]: 0.000454351 kg; lognormal variance with pedigree 0.78825, pedigree (1,1,4,1,1)
  sum of fuel-NOx and thermal-NOx emitted to air after DeNOx stage.
  Uncertainty: uncertainty calculated from uncertainty in average N-emissions and uncertainty in the share of thermal NOx and the uncertainty in nitrogen content in *this* waste.
- Particulate Matter, < 2.5 um [air, urban air close to ground]: 5.33178e-6 kg; lognormal variance with pedigree 0.34709, pedigree (1,1,4,1,1)
  (same comment as for Benzene)
- Particulate Matter, > 2.5 um and < 10um [air, urban air close to ground]: 2.67929e-8 kg; lognormal variance with pedigree 0.1517, pedigree (1,1,4,1,1)
  (same comment as for Benzene)
- Phenol, pentachloro- [air, urban air close to ground]: 1.94479e-11 kg; lognormal variance with pedigree 0.062925, pedigree (1,1,4,1,1)
  (same comment as for Benzene)
- Phosphorus [air, urban air close to ground]: 9.99574e-6 kg; lognormal variance with pedigree 0.08399, pedigree (1,1,4,1,1)
  (same comment as for Aluminium III)
- Potassium I [air, urban air close to ground]: 8.14145e-6 kg; lognormal variance with pedigree 0.049765, pedigree (1,1,4,1,1)
  (same comment as for Aluminium III)
- Scandium [air, urban air close to ground]: 1.01018e-9 kg; lognormal variance with pedigree 0.57863, pedigree (1,1,4,1,1)
  (same comment as for Aluminium III)
- Selenium IV [air, urban air close to ground]: 1.57906e-8 kg; lognormal variance with pedigree 0.65731, pedigree (1,1,4,1,1)
  (same comment as for Aluminium III)
- Silicon [air, urban air close to ground]: 2.10339e-9 kg; lognormal variance with pedigree 0.16061, pedigree (1,1,4,1,1)
  (same comment as for Aluminium III)
- Sodium [air, urban air close to ground]: 1.06176e-5 kg; lognormal variance with pedigree 0.028939, pedigree (1,1,4,1,1)
  (same comment as for Aluminium III)
- Strontium [air, urban air close to ground]: 1.31911e-8 kg; lognormal variance with pedigree 0.17674, pedigree (1,1,4,1,1)
  (same comment as for Aluminium III)
- Sulfur dioxide [air, urban air close to ground]: 1.66653e-5 kg; lognormal variance with pedigree 0.048145, pedigree (1,1,4,1,1)
  (same comment as for Aluminium III)
- Thallium I [air, urban air close to ground]: 9.56812e-11 kg; lognormal variance with pedigree 1.0964, pedigree (1,1,4,1,1)
  (same comment as for Aluminium III)
- Tin ion [air, urban air close to ground]: 6.15396e-12 kg; lognormal variance with pedigree 0.55032, pedigree (1,1,4,1,1)
  (same comment as for Aluminium III)
- Titanium ion [air, urban air close to ground]: 4.86744e-8 kg; lognormal variance with pedigree 0.3137, pedigree (1,1,4,1,1)
  (same comment as for Aluminium III)
- Toluene [air, urban air close to ground]: 8.93157e-8 kg; lognormal variance with pedigree 0.062925, pedigree (1,1,4,1,1)
  (same comment as for Benzene)
- Vanadium V [air, urban air close to ground]: 2.33229e-7 kg; lognormal variance with pedigree 0.45976, pedigree (1,1,4,1,1)
  (same comment as for Aluminium III)
- Water [air, urban air close to ground]: 0.000937285 m3; lognormal variance with pedigree 0.02189, pedigree (1,1,4,1,1)
  water vapour from waste humidity, hydrogen oxidation and part of the process water.
  Uncertainty: Uncertainty calculated from uncertainty in waste composition, process water input and the uncertainty of fraction to air.
- Zinc II [air, urban air close to ground]: 2.11764e-7 kg; lognormal variance with pedigree 0.20466, pedigree (1,1,4,1,1)
  (same comment as for Aluminium III)
- Non-hazardous waste disposed [inventory indicator, waste]: 1 kg
  Inventory indicator for waste mass disposed. To be used in EN15804 "other data" results.
- Aluminium III [water, surface water]: 6.28051e-11 kg; lognormal variance with pedigree 0.33105, pedigree (1,1,4,1,1)
  Emissions to water from waste composition and incinerator transfer coefficients.
  Uncertainty: uncertainty is calculated from uncertainties in waste composition and transfer coefficients in incinerator
- Antimony ion [water, surface water]: 1.50372e-8 kg; lognormal variance with pedigree 0.56938, pedigree (1,1,4,1,1)
  (same comment as for Aluminium III)
- Arsenic ion [water, surface water]: 5.69342e-16 kg; lognormal variance with pedigree 0.68952, pedigree (1,1,4,1,1)
  (same comment as for Aluminium III)
- BOD5, Biological Oxygen Demand [water, surface water]: 6.70939e-5 kg; lognormal variance with pedigree 0.062651, pedigree (1,1,4,1,1)
  (same comment as for Aluminium III)
- Barium II [water, surface water]: 3.68998e-8 kg; lognormal variance with pedigree 0.14263, pedigree (1,1,4,1,1)
  (same comment as for Aluminium III)
- Beryllium II [water, surface water]: 2.91474e-13 kg; lognormal variance with pedigree 0.89641, pedigree (1,1,4,1,1)
  (same comment as for Aluminium III)
- Boron [water, surface water]: 2.99197e-8 kg; lognormal variance with pedigree 0.15752, pedigree (1,1,4,1,1)
  (same comment as for Aluminium III)
- COD, Chemical Oxygen Demand [water, surface water]: 6.70939e-5 kg; lognormal variance with pedigree 0.062651, pedigree (1,1,4,1,1)
  (same comment as for Aluminium III)
- Cadmium II [water, surface water]: 5.59168e-11 kg; lognormal variance with pedigree 0.56835, pedigree (1,1,4,1,1)
  (same comment as for Aluminium III)
- Calcium II [water, surface water]: 0.000293996 kg; lognormal variance with pedigree 0.0157681, pedigree (1,1,4,1,1)
  (same comment as for Aluminium III)
- Chromium III [water, surface water]: 2.1289e-9 kg; lognormal variance with pedigree 0.24989, pedigree (1,1,4,1,1)
  (same comment as for Aluminium III)
- Cobalt II [water, surface water]: 3.53534e-11 kg; lognormal variance with pedigree 0.29834, pedigree (1,1,4,1,1)
  (same comment as for Aluminium III)
- Copper ion [water, surface water]: 6.44018e-9 kg; lognormal variance with pedigree 0.26833, pedigree (1,1,4,1,1)
  (same comment as for Aluminium III)
- DOC, Dissolved Organic Carbon [water, surface water]: 2.93536e-5 kg; lognormal variance with pedigree 0.062651, pedigree (1,1,4,1,1)
  (same comment as for Aluminium III)
- Heat, waste [water, surface water]: 0.865411 MJ; lognormal variance with pedigree 0.056571, pedigree (1,1,4,1,1)
  (same comment as for Heat, waste)
- Iron ion [water, surface water]: 1.71804e-7 kg; lognormal variance with pedigree 0.12073, pedigree (1,1,4,1,1)
  (same comment as for Aluminium III)
- Lead II [water, surface water]: 8.15375e-10 kg; lognormal variance with pedigree 0.36023, pedigree (1,1,4,1,1)
  (same comment as for Aluminium III)
- Magnesium [water, surface water]: 6.55353e-6 kg; lognormal variance with pedigree 0.027734, pedigree (1,1,4,1,1)
  (same comment as for Aluminium III)
- Manganese II [water, surface water]: 1.0902e-8 kg; lognormal variance with pedigree 0.19674, pedigree (1,1,4,1,1)
  (same comment as for Aluminium III)
- Mercury II [water, surface water]: 3.86911e-11 kg; lognormal variance with pedigree 1.0366, pedigree (1,1,4,1,1)
  (same comment as for Aluminium III)
- Molybdenum VI [water, surface water]: 2.87492e-9 kg; lognormal variance with pedigree 0.39157, pedigree (1,1,4,1,1)
  (same comment as for Aluminium III)
- Nickel II [water, surface water]: 2.02771e-10 kg; lognormal variance with pedigree 0.31307, pedigree (1,1,4,1,1)
  (same comment as for Aluminium III)
- Nitrate [water, surface water]: 4.68333e-5 kg; lognormal variance with pedigree 0.048783, pedigree (1,1,4,1,1)
  (same comment as for Aluminium III)
- Phosphate [water, surface water]: 1.31685e-5 kg; lognormal variance with pedigree 0.045427, pedigree (1,1,4,1,1)
  (same comment as for Aluminium III)
- Potassium I [water, surface water]: 0.000190473 kg; lognormal variance with pedigree 0.028837, pedigree (1,1,4,1,1)
  (same comment as for Aluminium III)
- Scandium [water, surface water]: 3.86831e-15 kg; lognormal variance with pedigree 0.62818, pedigree (1,1,4,1,1)
  (same comment as for Aluminium III)
- Selenium IV [water, surface water]: 1.40577e-8 kg; lognormal variance with pedigree 0.46745, pedigree (1,1,4,1,1)
  (same comment as for Aluminium III)
- Silicon [water, surface water]: 7.26735e-8 kg; lognormal variance with pedigree 0.077147, pedigree (1,1,4,1,1)
  (same comment as for Aluminium III)
- Silver I [water, surface water]: 8.75729e-9 kg; lognormal variance with pedigree 0.57442, pedigree (1,1,4,1,1)
  (same comment as for Aluminium III)
- Sodium I [water, surface water]: 0.000194291 kg; lognormal variance with pedigree 0.0147218, pedigree (1,1,4,1,1)
  (same comment as for Aluminium III)
- Strontium [water, surface water]: 3.18554e-9 kg; lognormal variance with pedigree 0.16661, pedigree (1,1,4,1,1)
  (same comment as for Aluminium III)
- Sulfate [water, surface water]: 0.000247978 kg; lognormal variance with pedigree 0.029113, pedigree (1,1,4,1,1)
  (same comment as for Aluminium III)
- TOC, Total Organic Carbon [water, surface water]: 2.93536e-5 kg; lognormal variance with pedigree 0.062651, pedigree (1,1,4,1,1)
  (same comment as for Aluminium III)
- Thallium I [water, surface water]: 8.98716e-12 kg; lognormal variance with pedigree 1.1005, pedigree (1,1,4,1,1)
  (same comment as for Aluminium III)
- Tin ion [water, surface water]: 8.31596e-9 kg; lognormal variance with pedigree 0.45789, pedigree (1,1,4,1,1)
  (same comment as for Aluminium III)
- Titanium ion [water, surface water]: 8.34892e-9 kg; lognormal variance with pedigree 0.31784, pedigree (1,1,4,1,1)
  (same comment as for Aluminium III)
- Tungsten [water, surface water]: 6.13472e-9 kg; lognormal variance with pedigree 0.77054, pedigree (1,1,4,1,1)
  (same comment as for Aluminium III)
- Vanadium V [water, surface water]: 1.45868e-9 kg; lognormal variance with pedigree 0.25295, pedigree (1,1,4,1,1)
  (same comment as for Aluminium III)
- Water [water, surface water]: 7.20768e-5 m3; lognormal variance with pedigree 0.38522, pedigree (1,1,4,1,1)
  process water released to surface water.
  Uncertainty: uncertainty calculated from uncertainty in process water input and the uncertainty of fraction to surface water.
- Zinc II [water, surface water]: 1.26727e-8 kg; lognormal variance with pedigree 0.18516, pedigree (1,1,4,1,1)
  (same comment as for Aluminium III)

## Extrapolations
Modelling parameters are based on an average municipal solid waste incineration plant in Switzerland for the year of 2010 (grate incinerators).
