# rice production, non-basmati

Dataset: EcoSpold 2, unit process
Geography: RoW
Time period: 2001-01-01 to 2022-12-31
Technology level: current
Classification: ISIC rev.4 ecoinvent: 0112:Growing of rice
Scenario: Business-as-Usual
System model: Substitution, consequential, long-term
Share of production covered: 100 %
Generated by: Thomas Kägi
Published in: Nemecek, T. 2007
Database: ecoinvent
isCopyrightProtected: true

## General comment
This dataset represents the production of 1 kg of rice (fresh matter). The yield is 6856 kg/ha at a moisture content at storage of 13%.

[This dataset was already contained in the ecoinvent database version 2. It was not individually updated during the transfer to ecoinvent version 3. Life Cycle Impact Assessment results may still have changed, as they are affected by changes in the supply chain, i.e. in other datasets. This dataset was generated following the ecoinvent quality guidelines for version 2. It may have been subject to central changes described in the ecoinvent version 3 change report (http://www.ecoinvent.org/database/ecoinvent-version-3/reports-of-changes/), and the results of the central updates were reviewed extensively. The changes added e.g. consistent water flows and other information throughout the database. The documentation of this dataset can be found in the ecoinvent reports of version 2, which are still available via the ecoinvent website. The change report linked above covers all central changes that were made during the conversion process.]
[This dataset is meant to replace the following datasets:]

## Included activities start
This activity starts after the harvest of the previous crop. The inputs of seeds, mineral fertilisers, pesticides and irrigation water are considered. It is assumed that no organic fertilisers are applied.

## Included activities end
The dataset includes all machine operations and corresponding machine infrastructure and sheds. Machine operations are: soil cultivation, sowing, fertilisation, irrigation, weed control, pest and pathogen control, combine-harvest and drying of grains. Further, direct field emissions are included. This activity ends after harvest and drying of grains at the farm gate.

## Geography
Refers to an average global production

## Technology
Conventional production typical for the country. Water for irrigation is pumped from 48 meter depth by electric pumps.

## Time period
The yield data have been collected for the years 2001-2006.

## Parameters
- fraction, irrigation water to surface water: 0.2 dimensionless; lognormal variance with pedigree 0.0886, pedigree (4,3,1,1,4)
- fraction, irrigation water, to air: 0.586986 dimensionless; lognormal variance with pedigree 0.0409, pedigree (2,2,2,1,1)
- fraction, irrigation water, to ground water: 0.8 dimensionless; lognormal variance with pedigree 0.0886, pedigree (4,3,1,1,4)

## Reference product
- rice, non-basmati: 1 kg; name REF_PRODUCT; By-product classification allocatable product; CPC 0113: Rice
  production volume 3.60947e11 kg
    Global production quantity of rice, paddy in 2016 as reported in FAOSTAT.
    Reference: Food and Agricultural Organization of the United Nations, 2018, Crops data, available online at: http://www.fao.org/faostat/en/#data/QC
  property carbon content, non-fossil 0.46412; name REF_PRODUCT_C_content_non_fossil
    biogene carbon content on a dry matter basis
  property energy content 15.4077 MJ; name REF_PRODUCT_energy_content
    as gross calorific value (when relevant)
  property price 0.37 EUR2005
    Calculated value based on data from United Nations Commodity Trade Statistics Database (comtrade.un.org). UN comtrade category: 1006 Rice. Year 2005. Using exchange rate of 1EURO = 1.209 USD. Average of price of import into 5 main markets (EU, US, JP, IN and CN).
  properties: carbon allocation 0.403784 kg, carbon content 0.46412, carbon content, fossil 0, dry mass 0.87 kg, water content 0.149425, water in wet mass 0.13 kg, wet mass 1 kg

## Inputs from technosphere
- [sulfonyl]urea-compound: 3.5136e-7 kg; lognormal variance with pedigree 0.0426, pedigree (2,1,5,5,1)
  EcoSpold01Location=CH
  See chapter 'Yields and Inputs of Arable Crop Production' in "01_crop production - yields & inputs US_v1.0.pdf" - pdf-document on the dedicated talk page of ecoinvent (www.ecoinvent.org/documentation)
  properties: carbon content, fossil 0.540853, dry mass 1 kg, wet mass 1 kg
  note on carbon content, fossil: Approximated as an unweighted average of the C-content of the [sulfonyl]urea-compounds (Tab 2.25 Sutter, 2010) chlorotoluron, Diuron, Linuron and Isoproturon.
- [thio]carbamate-compound: 0.00016617 kg; lognormal variance with pedigree 0.0426, pedigree (2,1,5,5,1)
  (same comment as for [sulfonyl]urea-compound)
  properties: carbon content, fossil 0.626349, dry mass 1 kg, wet mass 1 kg
  note on carbon content, fossil: Approximated as an unweighted average of the C-content of the [thio]carbamate-compounds (Tab 2.25 Sutter, 2010) carbofuran,orbencarb, prosulfocarb
- acetamide-anillide-compound, unspecified: 0.0002727 kg; lognormal variance with pedigree 0.0426, pedigree (2,1,5,5,1)
  (same comment as for [sulfonyl]urea-compound)
  properties: carbon content, fossil 0.659175, dry mass 1 kg, wet mass 1 kg
  note on carbon content, fossil: Approximated as an unweighted average of the C-content of the acetamide-anillide-compound (Tab 2.25 Sutter, 2010) alachor, metolachlor, propachlor and teflubenzuron
- ammonia, anhydrous, liquid: 0.000401249, 8.16377e-5, 0.000364951, 0.00172381, 0.000241674, 0.00863367 kg (6 suppliers, which the file names only by identifier); sum of these 0.011447 kg; lognormal variance with pedigree 0.0427, pedigree (2,2,5,5,1)
  See chapter 'Yields and Inputs of Arable Crop Production' in "01_crop production - yields & inputs US_v1.0.pdf" - pdf-document on the dedicated talk page of ecoinvent (www.ecoinvent.org/documentation)
  EcoSpold01Location=RER
  properties: dry mass 1 kg, wet mass 1 kg
- ammonium nitrate: 0.00555381, 0.0100689 kg (2 suppliers, which the file names only by identifier); sum of these 0.0156227 kg; lognormal variance with pedigree 0.0427, pedigree (2,2,5,5,1)
  The exchange has been updated from 'ammonium nitrate, as N' into 'ammonium nitrate' and therefore its amount has been scaled (multiplied) from 0.0055 kg by 2.8573 kg of 'ammonium nitrate' per kg of 'ammonium nitrate, as N'. Original comment of the exchange is: See chapter 'Yields and Inputs of Arable Crop Production' in "01_crop production - yields & inputs US_v1.0.pdf" - pdf-document on the dedicated talk page of ecoinvent (www.ecoinvent.org/documentation)
  EcoSpold01Location=RER
  properties: dry mass 1 kg, wet mass 1 kg
- application of plant protection product, by field sprayer: 0.00094808 ha; lognormal variance with pedigree 0.0426, pedigree (2,1,5,5,1)
  See chapter 'Yields and Inputs of Arable Crop Production' in "01_crop production - yields & inputs US_v1.0.pdf" - pdf-document on the dedicated talk page of ecoinvent (www.ecoinvent.org/documentation)
  EcoSpold01Location=CH
- benzo[thia]diazole-compound: 3.982e-6 kg; lognormal variance with pedigree 0.0426, pedigree (2,1,5,5,1)
  (same comment as for application of plant protection product, by field sprayer)
  properties: carbon content, fossil 0.499869, dry mass 1 kg, wet mass 1 kg
  note on carbon content, fossil: C content estimated after the herbicide Bentazon (C10H12N2O3S) (Tab 1.5, Sutter 2010), classified in ecoinvent v2.2 report 15a, Tab 10.3 as a benzo[thia]diazole compound
- bipyridylium-compound: 1.7893e-7 kg; lognormal variance with pedigree 0.0426, pedigree (2,1,5,5,1)
  (same comment as for [sulfonyl]urea-compound)
  properties: carbon content, fossil 0.418929, dry mass 1 kg, wet mass 1 kg
  note on carbon content, fossil: C content was calculated after C content of Diquat (C12H12Br2N2). The herbicide Diquat is classified as a bipyridylium-compound in Tab 10.3 in ecoinvent v2.2 report 15a
- combine harvesting: 0.00014482 ha; lognormal variance with pedigree 0.0426, pedigree (2,1,5,5,1)
  (same comment as for [sulfonyl]urea-compound)
- cyclic N-compound: 1.9559e-5 kg; lognormal variance with pedigree 0.0426, pedigree (2,1,5,5,1)
  (same comment as for [sulfonyl]urea-compound)
  properties: carbon content, fossil 0.641962, dry mass 1 kg, wet mass 1 kg
  note on carbon content, fossil: Calculated as an unweigthed average of the C content of the cyclic N-compounds where information was avaliable in Sutter, 2010, following the classification in Tab 2.25 in Sutter 2010: Difenoconazole (C19H17Cl2N3O3), Fenpropidin (C19H31N), Fenpropimorph (C20H33NO), Flusilazole (C16H15F2N3Si), Metconazole (C17H22ClN3O), Penconazole (C13H15Cl2N3), Propiconazole (C15H17Cl2N3O2), Tebuconazole (C16H22ClN3O)
- dinitroaniline-compound: 9.6818e-6 kg; lognormal variance with pedigree 0.0426, pedigree (2,1,5,5,1)
  (same comment as for [sulfonyl]urea-compound)
  properties: carbon content, fossil 0.55516, dry mass 1 kg, wet mass 1 kg
  note on carbon content, fossil: C content of dinitroaniline-compound was calculated after the C content of the herbicide pendimethalin, classified as dinitroaniline-compound in Tab 2.25 of Sutter 2010
- drying of bread grain, seed and legumes: 0.1299 l; lognormal variance with pedigree 0.0427, pedigree (2,2,5,5,1)
  (same comment as for [sulfonyl]urea-compound)
- fertilising, by broadcaster: 0.00043758 ha; lognormal variance with pedigree 0.0426, pedigree (2,1,5,5,1)
  (same comment as for [sulfonyl]urea-compound)
- glyphosate: 1.421e-5 kg; lognormal variance with pedigree 0.0426, pedigree (2,1,5,5,1)
  (same comment as for [sulfonyl]urea-compound)
  properties: carbon content, fossil 0.214286, dry mass 1 kg, wet mass 1 kg
- inorganic nitrogen fertiliser, as N: 2.24789e-6, 4.02419e-5, 3.02886e-5, 2.32055e-5, 3.75422e-7, 1.39624e-6, 8.2164e-6, 1.94547e-6, 5.44593e-6, 0.00124746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 kg (27 suppliers, which the file names only by identifier); sum of these 0.0017123 kg; lognormal variance with pedigree 0.0427, pedigree (2,2,5,5,1)
  EcoSpold01Location=RER
  See chapter 'Yields and Inputs of Arable Crop Production' in "01_crop production - yields & inputs US_v1.0.pdf" - pdf-document on the dedicated talk page of ecoinvent (www.ecoinvent.org/documentation)
  properties: dry mass 1 kg, wet mass 1 kg
- inorganic phosphorus fertiliser, as P2O5: 7.23519e-5, 3.44676e-5, 4.38533e-5, 1.13217e-5, 2.90077e-6, 2.44723e-5, 4.9628e-5, 2.2697e-5, 0.00034337, 1.62122e-6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 kg (27 suppliers, which the file names only by identifier); sum of these 0.0043758 kg; lognormal variance with pedigree 0.0427, pedigree (2,2,5,5,1)
  (same comment as for ammonia, anhydrous, liquid)
  properties: dry mass 1 kg, wet mass 1 kg
- irrigation: 0.00174423, 0.0037741, 0.830793, 4.37427e-5, 0.0029076, 0.00850731, 0.00598246, 0.00018872, 0.010716, 0.00109357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 m3 (14 suppliers, which the file names only by identifier); sum of these 0.944153 m3; source Siebert, S. 2010; lognormal variance with pedigree 0.0447, pedigree (2,2,5,5,1)
  See chapter 'Yields and Inputs of Arable Crop Production' in "01_crop production - yields & inputs US_v1.0.pdf" - pdf-document on the dedicated talk page of ecoinvent (www.ecoinvent.org/documentation)
  Calculated based on literature values (Döll, 2010) and partially modelled at ETH (Pfister, S.).
  See chapter 'Yields and Inputs of Arable Crop Production' in "01_crop production - yields & inputs US_v1.0.pdf" - pdf-document on the dedicated talk page of ecoinvent (www.ecoinvent.org/documentation)
  Calculated based on literature values (Döll, 2010) and partially modelled at ETH (Pfister, S.).
  EcoSpold01Location=US
  properties: dry mass 0.11 kg, water content 9089.91, wet mass 1000 kg
- organophosphorus-compound, unspecified: 1.3186e-5 kg; lognormal variance with pedigree 0.0426, pedigree (2,1,5,5,1)
  (same comment as for [sulfonyl]urea-compound)
  properties: carbon content, fossil 0.260898, dry mass 1 kg, wet mass 1 kg
  note on carbon content, fossil: C content was calculated as an unweighted average of glyphosate, parathion, and fosetyl-Al. Those substances are classified as organo-phosphorous compounds in Tab 2.25, Sutter 2010
- packaging, for fertilisers: 0.0344 kg; lognormal variance with pedigree 0.0912, pedigree (4,3,5,5,4)
  Total amount of active substance/s of fertilisers needed for the production of 'rice' is calculated to be circa 1.72E-02 kg. Fertiliser/s used in this dataset is/are: 'nitrogen fertiliser, as N', 'phosphate fertiliser, as P2O5', 'urea, as N'. The total amount of active substance/s is doubled in order to account for the packaging of the dilluted product of fertiliser/s that is/are applied. Therefore, 3.44E-02 kg of packaging for fertilisers is justified with this exchange.
  properties: carbon content, fossil 0.825301, dry mass 1 kg, heating value, net 25.01 MJ, price 0.0642 EUR2005, wet mass 1 kg
  note on carbon content, fossil: Considering a chemical formula (C2H4)n for polyethylene, carbon content-fossil is calculated to be 0.856286 kg of Carbon per kg of dry mass.
- packaging, for pesticides: 0.00276935 kg; lognormal variance with pedigree 0.0912, pedigree (4,3,5,5,4)
  Total amount of active substance/s of pesticides needed for the production of rice is calculated to be circa 1.38E-03 kg. Pesticide/s used in this dataset is/are: '[thio]carbamate-compound', 'acetamide-anillide-compound, unspecified', 'cyclic N-compound', 'organophosphorus-compound, unspecified'. The total amount of active substance/s is doubled in order to account for the packaging of the dilluted product of pesticide/s that is/are applied. Therefore, 2.77E-03 kg of packaging for pesticides is justified with this exchange.
  properties: carbon content, fossil 0.85714, dry mass 1 kg, heating value, net 25.97 MJ, price 0.0642 EUR2005, wet mass 1 kg
- pesticide, unspecified: 3.5344e-5 kg; lognormal variance with pedigree 0.0426, pedigree (2,1,5,5,1)
  (same comment as for [sulfonyl]urea-compound)
  properties: carbon content, fossil 0.486978, dry mass 1 kg, wet mass 1 kg
  note on carbon content, fossil: Mean of C content in all pesticides whose formula has been documented in Sutter 2010
- phenoxy-compound: 2.61955e-5 kg; lognormal variance with pedigree 0.0426, pedigree (2,1,5,5,1)
  (same comment as for [sulfonyl]urea-compound)
  properties: carbon content, fossil 0.532559, dry mass 1 kg, wet mass 1 kg
  note on carbon content, fossil: An unweighted average of the C content in mCPA, mCPB, mecoprop, fluazifop-P-butyl, and 2,4-D. Those substances are classified as phenoxy-compounds in Tab 2.25, Sutter 2010
- potassium chloride: 0.00554312, 0.000459704 kg (2 suppliers, which the file names only by identifier); sum of these 0.00600282 kg; lognormal variance with pedigree 0.0427, pedigree (2,2,5,5,1)
  The exchange has been updated from 'potassium chloride, as K2O' into 'potassium chloride' and therefore its amount has been scaled (multiplied) from 0.0038 kg by 1.5829 kg of 'potassium chloride' per kg of 'potassium chloride, as K2O'. Original comment of the exchange is: See chapter 'Yields and Inputs of Arable Crop Production' in "01_crop production - yields & inputs US_v1.0.pdf" - pdf-document on the dedicated talk page of ecoinvent (www.ecoinvent.org/documentation)
  EcoSpold01Location=RER
  properties: dry mass 1 kg, wet mass 1 kg
- rice seed, for sowing: 0.020599 kg; name SEED; lognormal variance with pedigree 0.0427, pedigree (2,2,5,5,1)
  See chapter 'Yields and Inputs of Arable Crop Production' in "01_crop production - yields & inputs US_v1.0.pdf" - pdf-document on the dedicated talk page of ecoinvent (www.ecoinvent.org/documentation)
  EcoSpold01Location=US
  property carbon content, non-fossil 0.464122; name SEED_C_content_non_fossil
  property energy content 15.4077 MJ; name SEED_energy_content
  properties: dry mass 0.87 kg, water content 0.149425, wet mass 1 kg
  note on carbon content, non-fossil: biogene carbon content on a dry matter basis Composition data obtained from Rice, white, short-grain, raw, in (http://www.nal.usda.gov/fnic/foodcomp/search/). First, composition data were refered to 1 kg dry mass. Then, C-contents were calculated considering a C-content/dry mass of 46% in carbohydrates (including fibres), 53% in proteins and 75% in fats. All data from "Evolutionary and Biochemical Aspects", A.D. Kay and T. Vrede (in Global Ecology, 2010, Elsevier B.V., S.E. Jørgensen Ed.).
  note on energy content: See chapter 'Product Properties' in "01_crop production - yields & inputs US_v1.0.pdf" - pdf-document on the dedicated talk page of ecoinvent (www.ecoinvent.org/documentation)
- sowing: 0.00016336 ha; lognormal variance with pedigree 0.0426, pedigree (2,1,5,5,1)
  (same comment as for [sulfonyl]urea-compound)
- straw: -0.243835, -0.243835 kg (2 suppliers, which the file names only by identifier); sum of these -0.48767 kg
  Calculated as a weighted average contribution from new local producers China and India.
  production volume
    Calculated from production volume of reference product using the relative outputs.
  properties: carbon content, non-fossil 0.437377, dry mass 0.85 kg, heating value, net 14.25 MJ, price 0.012 EUR2005, water content 0.176471, wet mass 1 kg
  note on heating value, net: Literature value, Source: Phyllis2, database for (treated) biomass, algae, feedstocks for biogas production and biochar, https://phyllis.nl/Biomass/View/1271, ECN.TNO
- tillage, cultivating, chiselling: 0.00014586 ha; lognormal variance with pedigree 0.0426, pedigree (2,1,5,5,1)
  (same comment as for [sulfonyl]urea-compound)
- tillage, harrowing, by spring tine harrow: 0.00072929 ha; lognormal variance with pedigree 0.0426, pedigree (2,1,5,5,1)
  (same comment as for application of plant protection product, by field sprayer)
- tillage, ploughing: 2.9172e-5 ha; lognormal variance with pedigree 0.0426, pedigree (2,1,5,5,1)
  (same comment as for application of plant protection product, by field sprayer)
- tillage, rolling: 0.00014586 ha; lognormal variance with pedigree 0.0426, pedigree (2,1,5,5,1)
  (same comment as for [sulfonyl]urea-compound)
- urea: 0.00733754, 0.0011504 kg (2 suppliers, which the file names only by identifier); sum of these 0.00848794 kg; lognormal variance with pedigree 0.0427, pedigree (2,2,5,5,1)
  EcoSpold01Location=RER
  The exchange has been updated from 'urea, as N' into 'urea' and therefore its amount has been scaled (multiplied) from 0.004 kg by 2.1438 kg of 'urea' per kg of 'urea, as N'. Original comment of the exchange is: See chapter 'Yields and Inputs of Arable Crop Production' in "01_crop production - yields & inputs US_v1.0.pdf" - pdf-document on the dedicated talk page of ecoinvent (www.ecoinvent.org/documentation)
  properties: carbon content, fossil 0.2, dry mass 1 kg, wet mass 1 kg

## Inputs from nature
- Carbon dioxide, in air [natural resource, in air]: 1.45004 kg; = 44/12 * (REF_PRODUCT_C_content_non_fossil * REF_PRODUCT * REF_PRODUCT_DM - SEED_C_content_non_fossil * SEED * SEED_DM); lognormal variance with pedigree 0.0426, pedigree (2,1,5,5,1)
  Modelled,see chapter 'CO2 binding' in "01_crop production_direct field emissions and natural resources_v1.0.pdf" - pdf-document on the dedicated talk page of ecoinvent (www.ecoinvent.org/documentation)
- Energy, gross calorific value, in biomass [natural resource, biotic]: 16.342 MJ; lognormal variance with pedigree 0.0411891, pedigree (2,1,5,1,1)
- Occupation, annual crop, irrigated, intensive [natural resource, land]: 1.4586 m2*year; lognormal variance with pedigree 0.1626, pedigree (2,1,5,5,1)
  Modelled, see chapter 'Land use' in "01_crop production_direct field emissions and natural resources_v1.0.pdf" - pdf-document on the dedicated talk page of ecoinvent (www.ecoinvent.org/documentation)
- Transformation, from annual crop [natural resource, land]: 1.4586 m2; lognormal variance with pedigree 0.1626, pedigree (2,1,5,5,1)
  (same comment as for Occupation, annual crop, irrigated, intensive)
- Transformation, to annual crop, irrigated, intensive [natural resource, land]: 1.4586 m2; lognormal variance with pedigree 0.1626, pedigree (2,1,5,5,1)
  (same comment as for Occupation, annual crop, irrigated, intensive)

## Emissions to nature
- Ammonia [air, non-urban air or from high stacks]: 0.00128175 kg; lognormal variance with pedigree 0.0527, pedigree (2,2,5,5,1)
  Modelled, based on the 'AGRAMMON model' in "01_crop production_direct field emissions and natural resources_v1.0.pdf" - pfd-document on the dedicated talk page of econinvent (www.ecoinvent.og/documentation)
- Carbon dioxide, fossil [air, non-urban air or from high stacks]: 0.0062161 kg; lognormal variance with pedigree 0.0427, pedigree (2,2,5,5,1)
  Modelled, see chapter 'Release of fossil CO2 after urea applications' in "01_crop production_assessment methods of direct field emissions_v1.0.pdf" - pdf-document on the dedicated talk page of ecoinvent (www.ecoinvent.org/documentation)
- Dinitrogen monoxide [air, non-urban air or from high stacks]: 0.000595307 kg; name N2O; lognormal variance with pedigree 0.0727, pedigree (2,2,5,5,1)
  Modelled, based on chapter 'Emissions of N2O to the air' in "01_crop production_direct field emissions and natural resources_v1.0.pdf" - pfd-document on the dedicated talk page of econinvent (www.ecoinvent.og/documentation)
- Methane, non-fossil [air, non-urban air or from high stacks]: 0.040671 kg; lognormal variance with pedigree 0.0727, pedigree (2,2,5,5,1)
  Modelled, see chapter 'Emissions of pesticides to agricultural soil' in "01_crop production_direct field emissions and natural resources_v1.0.pdf" - pdf-document on the dedicated talk page of ecoinvent (www.ecoinvent.org/documentation)
- Nitrogen oxides [air, non-urban air or from high stacks]: 0.000125014 kg; = 0.21 * N2O; lognormal variance with pedigree 0.0727, pedigree (2,2,5,5,1)
  Modelled, see chapter 'Emissions of NOx to the air' in "01_crop production_direct field emissions and natural resources_v1.0.pdf" - pdf-document on the dedicated talk page of ecoinvent (www.ecoinvent.org/documentation)
- Sodium chlorate [air, urban air close to ground]: 3.5136e-6 kg; lognormal variance with pedigree 0.0526, pedigree (2,1,5,5,1)
  (same comment as for Methane, non-fossil)
- Water [air, unspecified]: 0.656092 m3; name water_to_air_unspecified; lognormal variance with pedigree 0.0827, pedigree (2,2,5,5,1)
  Calculated value based on literature values and expert opinion. See comments in the parametres' comment field.
  property fraction, origin: fresh water 1; name fraction_origin_fresh_water
  property fraction, origin: salt water 0; name fraction_origin_salt_water
  property fraction, origin: unspecified 0; name fraction_origin_unspecified
- 2,4-D [soil, agricultural]: 1.8362e-5 kg; lognormal variance with pedigree 0.0526, pedigree (2,1,5,5,1)
  (same comment as for Methane, non-fossil)
- Azoxystrobin [soil, agricultural]: 3.5396e-6 kg; lognormal variance with pedigree 0.0526, pedigree (2,1,5,5,1)
  (same comment as for Methane, non-fossil)
- Bensulfuron methyl ester [soil, agricultural]: 1.2363e-6 kg; lognormal variance with pedigree 0.0526, pedigree (2,1,5,5,1)
  (same comment as for Methane, non-fossil)
- Bentazone [soil, agricultural]: 3.982e-6 kg; lognormal variance with pedigree 0.0526, pedigree (2,1,5,5,1)
  (same comment as for Methane, non-fossil)
- Cadmium II [soil, agricultural]: 2.91984e-7 kg; lognormal variance with pedigree 0.0827, pedigree (2,2,5,5,1)
  Modelled, see chapter 'Emissions of heavy metals to agricultural soil, surface water and ground water' in "01_crop production_direct field emissions and natural resources_v1.0.pdf" - pdf-document on the dedicated talk page of ecoinvent (www.ecoinvent.org/documentation)
- Carbaryl [soil, agricultural]: 1.3143e-6 kg; lognormal variance with pedigree 0.0526, pedigree (2,1,5,5,1)
  (same comment as for Methane, non-fossil)
- Carbofuran [soil, agricultural]: 1.1972e-6 kg; lognormal variance with pedigree 0.0526, pedigree (2,1,5,5,1)
  (same comment as for Methane, non-fossil)
- Chromium III [soil, agricultural]: 2.41926e-7 kg; lognormal variance with pedigree 0.0827, pedigree (2,2,5,5,1)
  (same comment as for Cadmium II)
- Clomazone [soil, agricultural]: 1.8739e-5 kg; lognormal variance with pedigree 0.0526, pedigree (2,1,5,5,1)
  (same comment as for Methane, non-fossil)
- Copper ion [soil, agricultural]: 4.94084e-6 kg; lognormal variance with pedigree 0.0827, pedigree (2,2,5,5,1)
  (same comment as for Cadmium II)
- Fenoxaprop [soil, agricultural]: 7.8079e-8 kg; lognormal variance with pedigree 0.0526, pedigree (2,1,5,5,1)
  (same comment as for Methane, non-fossil)
- Glyphosate [soil, agricultural]: 1.421e-5 kg; lognormal variance with pedigree 0.0526, pedigree (2,1,5,5,1)
  (same comment as for Methane, non-fossil)
- Halosulfuron-methyl [soil, agricultural]: 3.5136e-7 kg; lognormal variance with pedigree 0.0526, pedigree (2,1,5,5,1)
  (same comment as for Methane, non-fossil)
- Lambda-cyhalothrin [soil, agricultural]: 5.0751e-7 kg; lognormal variance with pedigree 0.0526, pedigree (2,1,5,5,1)
  (same comment as for Methane, non-fossil)
- Lead II [soil, agricultural]: 2.2581e-7 kg; lognormal variance with pedigree 0.0827, pedigree (2,2,5,5,1)
  (same comment as for Cadmium II)
- MCPA [soil, agricultural]: 4.945e-7 kg; lognormal variance with pedigree 0.0526, pedigree (2,1,5,5,1)
  (same comment as for Methane, non-fossil)
- Malathion [soil, agricultural]: 1.8544e-7 kg; lognormal variance with pedigree 0.0526, pedigree (2,1,5,5,1)
  (same comment as for Methane, non-fossil)
- Mecoprop-P [soil, agricultural]: 9.3695e-7 kg; lognormal variance with pedigree 0.0526, pedigree (2,1,5,5,1)
  (same comment as for Methane, non-fossil)
- Mercury II [soil, agricultural]: -2.00782e-9 kg
  (same comment as for Cadmium II)
- Molinate [soil, agricultural]: 0.00010529 kg; lognormal variance with pedigree 0.0526, pedigree (2,1,5,5,1)
  (same comment as for Methane, non-fossil)
- Nickel II [soil, agricultural]: 1.25455e-7 kg; lognormal variance with pedigree 0.0827, pedigree (2,2,5,5,1)
  (same comment as for Cadmium II)
- Paraquat [soil, agricultural]: 1.7893e-7 kg; lognormal variance with pedigree 0.0526, pedigree (2,1,5,5,1)
  (same comment as for Methane, non-fossil)
- Parathion [soil, agricultural]: 1.3e-5 kg; lognormal variance with pedigree 0.0526, pedigree (2,1,5,5,1)
  (same comment as for Methane, non-fossil)
- Pendimethalin [soil, agricultural]: 9.6818e-6 kg; lognormal variance with pedigree 0.0526, pedigree (2,1,5,5,1)
  (same comment as for Methane, non-fossil)
- Propanil [soil, agricultural]: 0.0002727 kg; lognormal variance with pedigree 0.0526, pedigree (2,1,5,5,1)
  (same comment as for Methane, non-fossil)
- Propiconazole [soil, agricultural]: 8.1983e-7 kg; lognormal variance with pedigree 0.0526, pedigree (2,1,5,5,1)
  (same comment as for Methane, non-fossil)
- Quinclorac [soil, agricultural]: 4.5546e-6 kg; lognormal variance with pedigree 0.0526, pedigree (2,1,5,5,1)
  (same comment as for Methane, non-fossil)
- Thiobencarb [soil, agricultural]: 5.8364e-5 kg; lognormal variance with pedigree 0.0526, pedigree (2,1,5,5,1)
  (same comment as for Methane, non-fossil)
- Triclopyr [soil, agricultural]: 6.3244e-6 kg; lognormal variance with pedigree 0.0526, pedigree (2,1,5,5,1)
  (same comment as for Methane, non-fossil)
- Zinc II [soil, agricultural]: -7.98966e-6 kg
  (same comment as for Cadmium II)
- Cadmium II [water, ground-]: 5.50424e-9 kg; lognormal variance with pedigree 0.1327, pedigree (2,2,5,5,1)
  (same comment as for Cadmium II)
- Cadmium II [water, surface water]: 2.9144e-9 kg; lognormal variance with pedigree 0.1327, pedigree (2,2,5,5,1)
  (same comment as for Cadmium II)
- Chromium III [water, ground-]: 2.69869e-6 kg; lognormal variance with pedigree 0.1327, pedigree (2,2,5,5,1)
  (same comment as for Cadmium II)
- Chromium III [water, surface water]: 3.38411e-7 kg; lognormal variance with pedigree 0.1327, pedigree (2,2,5,5,1)
  (same comment as for Cadmium II)
- Copper ion [water, ground-]: 5.06846e-7 kg; lognormal variance with pedigree 0.1327, pedigree (2,2,5,5,1)
  (same comment as for Cadmium II)
- Copper ion [water, surface water]: 3.12162e-7 kg; lognormal variance with pedigree 0.1327, pedigree (2,2,5,5,1)
  (same comment as for Cadmium II)
- Lead II [water, ground-]: 1.05877e-8 kg; lognormal variance with pedigree 0.1327, pedigree (2,2,5,5,1)
  (same comment as for Cadmium II)
- Lead II [water, surface water]: 3.79571e-8 kg; lognormal variance with pedigree 0.1327, pedigree (2,2,5,5,1)
  (same comment as for Cadmium II)
- Mercury II [water, ground-]: 1.30531e-10 kg; lognormal variance with pedigree 0.1327, pedigree (2,2,5,5,1)
  (same comment as for Cadmium II)
- Mercury II [water, surface water]: 9.30182e-11 kg; lognormal variance with pedigree 0.1327, pedigree (2,2,5,5,1)
  (same comment as for Cadmium II)
- Nickel II [water, surface water]: 1.70614e-7 kg; lognormal variance with pedigree 0.1327, pedigree (2,2,5,5,1)
  (same comment as for Cadmium II)
- Nitrate [water, ground-]: 0.0469025 kg; lognormal variance with pedigree 0.0827, pedigree (2,2,5,5,1)
  Modelled with the 'SQCB-NO3 model' described in "01_crop production_direct field emissions and natural resources_v1.0.pdf" - pdf-document on the dedicated talk page of ecoinvent (www.ecoinvent.org/documentation)
- Phosphate [water, ground-]: 1.021e-5 kg; lognormal variance with pedigree 0.0827, pedigree (2,2,5,5,1)
  Modelled, based on chapter 'Emissions of phosphorous to the water' in "01_crop production_direct field emissions and natural resources_v1.0.pdf" - pfd-document on the dedicated talk page of econinvent (www.ecoinvent.og/documentation)
- Phosphate [water, surface water]: 0.00020517 kg; lognormal variance with pedigree 0.0827, pedigree (2,2,5,5,1)
  (same comment as for Phosphate)
- Phosphorus [water, surface water]: 0.00015184 kg; lognormal variance with pedigree 0.0827, pedigree (2,2,5,5,1)
  (same comment as for Phosphate)
- Water [water, ground-]: 0.230449 m3; name water_to_water_ground; lognormal variance with pedigree 0.1306, pedigree (4,3,5,5,4)
  Calculated value. See the parameters and their comments to understand the calculation.
  property carbon content, fossil 0; name C_content_fossil
  property carbon content, non-fossil 0; name C_content_non_fossil
  property fraction, origin: fresh water 1; name fraction_origin_fresh_water_Wgw
  property fraction, origin: salt water 0; name fraction_origin_salt_water_Wgw
  property fraction, origin: unspecified 0; name fraction_origin_unspecified_Wgw
  property water in wet mass 1000 kg; name WWM
- Water [water, surface water]: 0.0576122 m3; name water_to_water_surface; lognormal variance with pedigree 0.1306, pedigree (4,3,5,5,4)
  Calculated value. See the parameters and their comments to understand the calculation.
  property fraction, origin: fresh water 1; name fraction_origin_fresh_water_Wsw
  property fraction, origin: salt water 0; name fraction_origin_salt_water_Wsw
- Zinc II [water, ground-]: 1.59801e-6 kg; lognormal variance with pedigree 0.1327, pedigree (2,2,5,5,1)
  (same comment as for Cadmium II)
- Zinc II [water, surface water]: 2.64945e-7 kg; lognormal variance with pedigree 0.1327, pedigree (2,2,5,5,1)
  (same comment as for Cadmium II)

## Sampling procedure
Data come from the NREL database and from varoius U.S database. Data were compiled from statistics, literature, farm survey reports, documents from extension services, and expert knowledge.

## Extrapolations
This dataset has been copied from an original dataset covering the geography US.
