# treatment of waste polyethylene, sanitary landfill

Dataset: EcoSpold 2, unit process
Geography: RoW
Time period: 1994-01-01 to 2022-12-31
Technology level: current
Classification: ISIC rev.4 ecoinvent: 3821:Treatment and disposal of non-hazardous waste
Classification: EcoSpold01Categories: waste management/sanitary landfill
Synonyms: PE
Tags: ConvertedDataset; Treatment
Scenario: Business-as-Usual
System model: Substitution, consequential, long-term
Generated by: Gabor Doka (obsolete)
Published in: Doka G. 2007
Database: ecoinvent
isCopyrightProtected: true

## General comment
Inventoried waste contains 100% PE; .
waste composition (wet, in ppm): upper heating value 42.82 MJ/kg; lower heating value 42.47 MJ/kg; H2O 4000; O 38435; H 122490; C 822050; S 426.9; N 1297.2; P n.a.; B n.a.; Cl 1461.5; Br 9.5896; F 14.384; I n.a.; Ag n.a.; As 1.822; Ba 239.74; Cd 33.946; Co 1.6782; Cr 12.466; Cu 41.367; Hg 0.047948; Mn 30.047; Mo n.a.; Ni 0.95896; Pb 22.596; Sb 10.069; Se 2.0138; Sn 3.814; V 2205.6; Zn 342.01; Be 0.47948; Sc n.a.; Sr 84.868; Ti 958.96; Tl 0.38358; W n.a.; Si n.a.; Fe 1534.3; Ca 2589.2; Al 191.79; K n.a.; Mg 95.896; Na 1405.4;
Share of carbon in waste that is biogenic 0%.
Overall degradability of waste during 100 years: 1%.
[This dataset was already contained in the ecoinvent database version 2. It was not individually updated during the transfer to ecoinvent version 3. Life Cycle Impact Assessment results may still have changed, as they are affected by changes in the supply chain, i.e. in other datasets. This dataset was generated following the ecoinvent quality guidelines for version 2. It may have been subject to central changes described in the ecoinvent version 3 change report (http://www.ecoinvent.org/database/ecoinvent-version-3/reports-of-changes/), and the results of the central updates were reviewed extensively. The changes added e.g. consistent water flows and other information throughout the database. The documentation of this dataset can be found in the ecoinvent reports of version 2, which are still available via the ecoinvent website. The change report linked above covers all central changes that were made during the conversion process.]

## Included activities end
Waste-specific short-term emissions to air via landfill gas incineration and landfill leachate. Burdens from treatment of short-term leachate (0-100a) in wastewater treatment plant (including WWTP sludge disposal in municipal incinerator). Long-term emissions from landfill to groundwater (after base lining failure).

## Geography
Technology encountered in Switzerland in 2000. Landfill includes base seal, leachate collection system, treatment of leachate in municipal wastewater treatment plant.

## Technology
Swiss municipal sanitary landfill for biogenic or untreated municipal waste ('reactive organic landfill'). Landfill gas and leachate collection system. Recultivation and monitoring for 150 years after closure.

## Reference product
- waste polyethylene: -1 kg; name waste_PE_RP; By-product classification Waste; CPC 39270: Waste, parings and scrap of plastics; CAS 9002-88-4
  EcoSpold01Location=CH
  production volume 8.17776e10 kg
    estimated proportion; source: ecoinvent v2; value to be replaced by value to be calculated from the demand for this treatment activity
  property carbon content, fossil 0.825301
    C content in 1 kg DM was calculated using data in Tab A.1, ecoinvent v2.2 report 13_I
  property heating value, net 42.47 MJ
    Value taken from the general comment of the treatment dataset.
  property price 0 EUR2005
    Waste products are assigned a price of zero as they are assumed to require further treatment.
  properties: carbon allocation 0.822 kg, carbon content 0.825301, carbon content, non-fossil 0, dry mass 0.996 kg, water content 0.00401606, water in wet mass 0.004 kg, wet mass 1 kg

## Inputs from technosphere
- ammonia, anhydrous, liquid: 1.27974e-9, 2.60374e-10, 2.48423e-9, 9.56921e-9, 1.16397e-9, 7.70792e-10, 2.75361e-8, 2.53561e-9 kg (8 suppliers, which the file names only by identifier); sum of these 4.56e-8 kg; lognormal variance with pedigree 0.742, pedigree (1,1,5,5,1)
  EcoSpold01Location=CH
  burden from incineration of sludge from wastewater treatment of the short-term leachate (0-100a). uncertainty is calculated from uncertainties in waste composition and transfer coefficients in incinerator and uncertainty of waste decomposition and short-term leaching in sanitary landfill
  properties: dry mass 1 kg, wet mass 1 kg
- cement, unspecified: 5.42921e-9, 8.90908e-9, 3.38345e-8, 4.20729e-10, 8.36198e-10, 1.2784e-9, 3.40731e-7, 1.06203e-9, 2.04985e-8 kg (9 suppliers, which the file names only by identifier); sum of these 4.13e-7 kg; lognormal variance with pedigree 0.432, pedigree (1,1,5,5,1)
  (same comment as for ammonia, anhydrous, liquid)
  properties: dry mass 1 kg, wet mass 1 kg
- chemical, inorganic: 1.76e-10 kg; lognormal variance with pedigree 0.832, pedigree (1,1,5,5,1)
  EcoSpold01Location=GLO
  burden from incineration of sludge from wastewater treatment of the short-term leachate (0-100a). uncertainty is calculated from uncertainties in waste composition and transfer coefficients in incinerator and uncertainty of waste decomposition and short-term leaching in sanitary landfill
  properties: carbon content, fossil 0.003, dry mass 1 kg, wet mass 1 kg
  note on carbon content, fossil: This dataset is an unweighted average of 20 inorganic substances (listed in Tab 88.1, ecoinvent v2.2 report 8, part II), being part of the top100 chemicals included in this database. The C-content has also been calculated as an unweighted average of the C content of the substances composing this dataset.
- chemical, organic: 9.14e-8 kg; lognormal variance with pedigree 1.752, pedigree (1,1,5,5,1)
  burden from incineration of sludge from wastewater treatment of the short-term leachate (0-100a). uncertainty is calculated from uncertainties in waste composition and transfer coefficients in incinerator and uncertainty of waste decomposition and short-term leaching in sanitary landfill
  EcoSpold01Location=GLO
  properties: carbon content, fossil 0.628, dry mass 1 kg, heating value, net 19.03 MJ, wet mass 1 kg
  note on carbon content, fossil: This dataset is an unweighted average of 20 organic substances (listed in Tab 88.1, ecoinvent v2.2 report 8, part II), being part of the top100 chemicals included in this database. The C-content has also been calculated as an unweighted average of the C content of the substances composing this dataset.
- chromium oxide, flakes: 2.66e-11 kg; lognormal variance with pedigree 1.11, pedigree (5,5,5,5,5)
  EcoSpold01Location=RER
  burden from incineration of sludge from wastewater treatment of the short-term leachate (0-100a). Proxy for vanadium pentoxide V2O5 in SCR catalyst, uncertainty calculated from uncertainty in average DeNOx input, uncertainty in the share of thermal NOx, uncertainty of nitrogen content in average municipal waste and the unertainty in nitrogen content in *this* waste and uncertainty of waste decomposition and short-term leaching in sanitary landfill
  Uncertainty: . Proxy for vanadium pentoxide V2O5 in SCR catalyst, uncertainty calculated from uncertainty in average DeNOx input, uncertainty in the share of thermal NOx, uncertainty of nitrogen content in average municipal waste and the unertainty in nitrogen content in *this* waste and uncertainty of waste decomposition and short-term leaching in sanitary landfill
  properties: dry mass 1 kg, wet mass 1 kg
- electricity, high voltage: 1.82766e-6, 6.75297e-8, 6.75181e-8, 1.49869e-5, 3.37845e-7, 1.26243e-6, 1.89117e-6, 8.58939e-7 kWh (8 suppliers, which the file names only by identifier); sum of these 2.13e-5 kWh; lognormal variance with pedigree 1.112, pedigree (1,1,5,5,1)
  (same comment as for ammonia, anhydrous, liquid)
- electricity, low voltage: 4.15516e-6, 0.000250071, 2.78892e-5, 3.47282e-5, 2.99565e-5, 1.04452e-6, 1.40488e-5, 5.10712e-6 kWh (8 suppliers, which the file names only by identifier); sum of these 0.000367 kWh; lognormal variance with pedigree 0.56, pedigree (5,5,5,5,5)
  EcoSpold01Location=CH
  burden from wastewater treatment of the short-term leachate (0-100a). Uncertainty calculated from unertainty of the waste composition of this waste, uncertainty in waste decomposition and short-term leaching in sanitary landfill
  Uncertainty: . Uncertainty calculated from unertainty of the waste composition of this waste, uncertainty in waste decomposition and short-term leaching in sanitary landfill
- heat, central or small-scale, other than natural gas: 3.61128e-5, 7.72049e-8 MJ (2 suppliers, which the file names only by identifier); sum of these 3.619e-5 MJ; lognormal variance with pedigree 0.22, pedigree (5,5,5,5,5)
  (same comment as for electricity, low voltage)
  properties: heating value, net 1 MJ
- heat, district or industrial, natural gas: 5.16604e-6, 1.4608e-5, 3.4046e-5 MJ (3 suppliers, which the file names only by identifier); sum of these 5.382e-5 MJ; lognormal variance with pedigree 0.742, pedigree (1,1,5,5,1)
  burden from incineration of sludge from wastewater treatment of the short-term leachate (0-100a). uncertainty is calculated from uncertainties in waste composition and transfer coefficients in incinerator and uncertainty of waste decomposition and short-term leaching in sanitary landfill
  EcoSpold01Location=RER
  properties: heating value, net 1 MJ
- heat, district or industrial, other than natural gas: 0.000102775, 1.79464e-7, 2.10452e-5 MJ (3 suppliers, which the file names only by identifier); sum of these 0.000124 MJ; lognormal variance with pedigree 0.712, pedigree (1,1,5,5,1)
  burden from incineration of sludge from wastewater treatment of the short-term leachate (0-100a). uncertainty is calculated from uncertainties in waste composition and transfer coefficients in incinerator and uncertainty of waste decomposition and short-term leaching in sanitary landfill
  EcoSpold01Location=CH
  properties: heating value, net 1 MJ
- hydrochloric acid, without water, in 30% solution state: 1.06e-10 kg; lognormal variance with pedigree 0.832, pedigree (1,1,5,5,1)
  (same comment as for heat, district or industrial, natural gas)
  properties: dry mass 1 kg, heating value, net 3.32 MJ, wet mass 1 kg
- iron (III) chloride, without water, in 40% solution state: 3.07e-8 kg; lognormal variance with pedigree 0.872, pedigree (1,1,5,5,1)
  (same comment as for heat, district or industrial, other than natural gas)
  properties: dry mass 1 kg, wet mass 1 kg
- municipal waste incineration facility: 3.7e-14 unit; lognormal variance with pedigree 0.712, pedigree (1,1,5,5,1)
  EcoSpold01Location=CH
  Burden from incineration of sludge from wastewater treatment of the short-term leachate (0-100a).
- process-specific burdens, municipal waste incineration: 4.18654e-5, 0.000106135 kg (2 suppliers, which the file names only by identifier); sum of these 0.000148 kg; lognormal variance with pedigree 0.712, pedigree (1,1,5,5,1)
  Burden from incineration of sludge from wastewater treatment of the short-term leachate (0-100a).
  EcoSpold01Location=CH
- process-specific burdens, residual material landfill: 2.91361e-7, 7.38639e-7 kg (2 suppliers, which the file names only by identifier); sum of these 1.03e-6 kg; lognormal variance with pedigree 0.432, pedigree (1,1,5,5,1)
  (same comment as for heat, district or industrial, other than natural gas)
- process-specific burdens, sanitary landfill: 1 kg; lognormal variance with pedigree 0.042, pedigree (1,1,5,5,1)
  demands per kilogram waste. uncertainty is heeded in the module
  EcoSpold01Location=CH
- process-specific burdens, slag landfill: 1.72271e-6, 4.36729e-6 kg (2 suppliers, which the file names only by identifier); sum of these 6.09e-6 kg; lognormal variance with pedigree 0.542, pedigree (1,1,5,5,1)
  (same comment as for heat, district or industrial, other than natural gas)
- quicklime, milled, packed: 4.11e-10 kg; lognormal variance with pedigree 0.662, pedigree (1,1,5,5,1)
  (same comment as for heat, district or industrial, other than natural gas)
  properties: dry mass 0.99 kg, water content 0.010101, wet mass 1 kg
- residual material landfill: 2.15e-15 unit; lognormal variance with pedigree 0.432, pedigree (1,1,5,5,1)
  (same comment as for ammonia, anhydrous, liquid)
- sanitary landfill facility: 5.56e-10 unit; lognormal variance with pedigree 0.042, pedigree (1,1,5,5,1)
  EcoSpold01Location=CH
  demands per kilogram waste. uncertainty is heeded in the module
- sewer grid, 5E9l/year, 110 km: 5.45e-10 km; lognormal variance with pedigree 0.2106, pedigree (5,5,5,5,5)
  (same comment as for electricity, low voltage)
- slag landfill: 1.08e-14 unit; lognormal variance with pedigree 0.542, pedigree (1,1,5,5,1)
  (same comment as for ammonia, anhydrous, liquid)
- sodium hydroxide, without water, in 50% solution state: 2.26e-9 kg; lognormal variance with pedigree 0.662, pedigree (1,1,5,5,1)
  (same comment as for heat, district or industrial, natural gas)
  properties: dry mass 1 kg, heating value, net 3.03 MJ, wet mass 1 kg
- titanium dioxide: 1.3e-9 kg; lognormal variance with pedigree 1.002, pedigree (1,1,5,5,1)
  EcoSpold01Location=RER
  burden from incineration of sludge from wastewater treatment of the short-term leachate (0-100a). uncertainty is calculated from uncertainties in waste composition and transfer coefficients in incinerator and uncertainty of waste decomposition and short-term leaching in sanitary landfill
  properties: dry mass 1 kg, wet mass 1 kg
- waste cement, hydrated: -2.91361e-7, -7.38639e-7 kg (2 suppliers, which the file names only by identifier); sum of these -1.03e-6 kg
  (same comment as for ammonia, anhydrous, liquid)
  production volume
    Calculated from the production volume of waste polyethylene, 0.4% water in proportion to the respective output amounts.
  properties: dry mass 1 kg, wet mass 1 kg
- waste graphical paper: -2.59179e-7, -4.09465e-6, -9.36524e-7, -9.13189e-8, -1.69726e-6, -1.69041e-7, -2.26629e-8, -3.15294e-5 kg (8 suppliers, which the file names only by identifier); sum of these -3.88e-5 kg
  burden from wastewater treatment of the short-term leachate (0-100a). Uncertainty calculated from unertainty of the waste composition of this waste, uncertainty in waste decomposition and short-term leaching in sanitary landfill
  EcoSpold01Location=CH
  production volume
    (same comment as for waste cement, hydrated)
  properties: carbon content, non-fossil 0.454955, dry mass 0.888 kg, heating value, net 14.12 MJ, water content 0.126126, wet mass 1 kg
  note on heating value, net: Value taken from the general comment of the treatment dataset.
- waste plastic, mixture: -2.18105e-8, -4.31618e-6, -1.19116e-7, -1.13112e-7, -2.88391e-7, -3.67759e-6, -4.81214e-8, -3.02157e-5 kg (8 suppliers, which the file names only by identifier); sum of these -3.88e-5 kg
  (same comment as for waste graphical paper)
  production volume
    (same comment as for waste cement, hydrated)
  properties: carbon content, fossil 0.747344, dry mass 0.847 kg, heating value, net 30.79 MJ, water content 0.180638, wet mass 1 kg
  note on carbon content, fossil: C content in 1 kg DM was calculated using data in Tab A.2, ecoinvent v2.2 report 13_I
- wastewater treatment facility, capacity 5E9l/year: 1.42e-11 unit; lognormal variance with pedigree 0.2106, pedigree (5,5,5,5,5)
  burden from wastewater treatment of the short-term leachate (0-100a). Uncertainty calculated from unertainty of the waste composition of this waste, uncertainty in waste decomposition and short-term leaching in sanitary landfill
  EcoSpold01Location=CH
  Uncertainty: . Uncertainty calculated from unertainty of the waste composition of this waste, uncertainty in waste decomposition and short-term leaching in sanitary landfill

## Emissions to nature
- Aluminium III [air, non-urban air or from high stacks]: 2.4e-11 kg; lognormal variance with pedigree 2.742, pedigree (1,1,5,5,1)
  burden from direct release or incineration of landfill biogas. Uncertainty calculated from unertainty of the waste composition of this waste, uncertainty in waste decomposition and short-term leaching in sanitary landfill
- Aluminium III [air, urban air close to ground]: 1.41e-10 kg; lognormal variance with pedigree 1.692, pedigree (1,1,5,5,1)
  Emissions from short-term leachate treatment and incineration of resulting sludge. Uncertainty calculated depending on waste input and uncertainty of transfer coefficents in landfill, wastewater treatment and incineration model.
- Ammonia [air, urban air close to ground]: 2.89e-8 kg; lognormal variance with pedigree 0.652, pedigree (1,1,5,5,1)
  (same comment as for Aluminium III)
- Antimony ion [air, non-urban air or from high stacks]: 2.65e-12 kg; lognormal variance with pedigree 3.042, pedigree (1,1,5,5,1)
  (same comment as for Aluminium III)
- Antimony ion [air, urban air close to ground]: 5.23e-13 kg; lognormal variance with pedigree 2.602, pedigree (1,1,5,5,1)
  (same comment as for Aluminium III)
- Arsenic ion [air, non-urban air or from high stacks]: 4.59e-11 kg; lognormal variance with pedigree 2.672, pedigree (1,1,5,5,1)
  (same comment as for Aluminium III)
- Arsenic ion [air, urban air close to ground]: 9.21e-13 kg; lognormal variance with pedigree 2.152, pedigree (1,1,5,5,1)
  (same comment as for Aluminium III)
- Barium II [air, non-urban air or from high stacks]: 6.86e-10 kg; lognormal variance with pedigree 2.312, pedigree (1,1,5,5,1)
  (same comment as for Aluminium III)
- Barium II [air, urban air close to ground]: 2.58e-9 kg; lognormal variance with pedigree 1.272, pedigree (1,1,5,5,1)
  (same comment as for Aluminium III)
- Beryllium II [air, non-urban air or from high stacks]: 6.97e-14 kg; lognormal variance with pedigree 3.512, pedigree (1,1,5,5,1)
  (same comment as for Aluminium III)
- Beryllium II [air, urban air close to ground]: 1.37e-13 kg; lognormal variance with pedigree 2.462, pedigree (1,1,5,5,1)
  (same comment as for Aluminium III)
- Bromine [air, non-urban air or from high stacks]: 3.39e-9 kg; lognormal variance with pedigree 2.102, pedigree (1,1,5,5,1)
  (same comment as for Aluminium III)
- Cadmium II [air, non-urban air or from high stacks]: 3.98e-10 kg; lognormal variance with pedigree 2.392, pedigree (1,1,5,5,1)
  (same comment as for Aluminium III)
- Cadmium II [air, urban air close to ground]: 1.63e-12 kg; lognormal variance with pedigree 1.782, pedigree (1,1,5,5,1)
  (same comment as for Aluminium III)
- Calcium [air, non-urban air or from high stacks]: 8.43e-10 kg; lognormal variance with pedigree 2.282, pedigree (1,1,5,5,1)
  (same comment as for Aluminium III)
- Calcium [air, urban air close to ground]: 5.51e-10 kg; lognormal variance with pedigree 1.232, pedigree (1,1,5,5,1)
  (same comment as for Aluminium III)
- Carbon dioxide, fossil [air, non-urban air or from high stacks]: 0.0206 kg; lognormal variance with pedigree 0.412, pedigree (1,1,5,5,1)
  (same comment as for Aluminium III)
- Carbon dioxide, fossil [air, urban air close to ground]: 0.000687 kg; lognormal variance with pedigree 0.862, pedigree (1,1,5,5,1)
  (same comment as for Aluminium III)
- Carbon monoxide, fossil [air, non-urban air or from high stacks]: 1.17e-6 kg; lognormal variance with pedigree 1.062, pedigree (1,1,5,5,1)
  (same comment as for Aluminium III)
- Carbon monoxide, fossil [air, urban air close to ground]: 4.43e-7 kg; lognormal variance with pedigree 0.922, pedigree (1,1,5,5,1)
  (same comment as for Aluminium III)
- Chromium III [air, non-urban air or from high stacks]: 3.55e-13 kg; lognormal variance with pedigree 3.292, pedigree (1,1,5,5,1)
  (same comment as for Aluminium III)
- Chromium III [air, urban air close to ground]: 5.17e-17 kg; lognormal variance with pedigree 2.332, pedigree (1,1,5,5,1)
  (same comment as for Aluminium III)
- Cobalt II [air, non-urban air or from high stacks]: 1.35e-12 kg; lognormal variance with pedigree 3.132, pedigree (1,1,5,5,1)
  (same comment as for Aluminium III)
- Cobalt II [air, urban air close to ground]: 8.43e-17 kg; lognormal variance with pedigree 2.172, pedigree (1,1,5,5,1)
  (same comment as for Aluminium III)
- Copper ion [air, non-urban air or from high stacks]: 5.79e-13 kg; lognormal variance with pedigree 3.222, pedigree (1,1,5,5,1)
  (same comment as for Aluminium III)
- Copper ion [air, urban air close to ground]: 1.11e-14 kg; lognormal variance with pedigree 2.252, pedigree (1,1,5,5,1)
  (same comment as for Aluminium III)
- Cyanide [air, urban air close to ground]: 8.13e-10 kg; lognormal variance with pedigree 0.762, pedigree (1,1,5,5,1)
  (same comment as for Aluminium III)
- Dinitrogen monoxide [air, urban air close to ground]: 7.97e-8 kg; lognormal variance with pedigree 0.582, pedigree (1,1,5,5,1)
  (same comment as for Aluminium III)
- Hydrochloric acid [air, non-urban air or from high stacks]: 5.31e-7 kg; lognormal variance with pedigree 1.432, pedigree (1,1,5,5,1)
  (same comment as for Aluminium III)
- Hydrogen fluoride [air, non-urban air or from high stacks]: 5.73e-8 kg; lognormal variance with pedigree 1.742, pedigree (1,1,5,5,1)
  (same comment as for Aluminium III)
- Iron ion [air, non-urban air or from high stacks]: 5.27e-11 kg; lognormal variance with pedigree 2.632, pedigree (1,1,5,5,1)
  (same comment as for Aluminium III)
- Iron ion [air, urban air close to ground]: 3.47e-12 kg; lognormal variance with pedigree 1.612, pedigree (1,1,5,5,1)
  (same comment as for Aluminium III)
- Lead II [air, non-urban air or from high stacks]: 4.44e-13 kg; lognormal variance with pedigree 3.262, pedigree (1,1,5,5,1)
  (same comment as for Aluminium III)
- Lead II [air, urban air close to ground]: 4.4e-14 kg; lognormal variance with pedigree 2.282, pedigree (1,1,5,5,1)
  (same comment as for Aluminium III)
- Magnesium [air, non-urban air or from high stacks]: 1.48e-10 kg; lognormal variance with pedigree 2.512, pedigree (1,1,5,5,1)
  (same comment as for Aluminium III)
- Magnesium [air, urban air close to ground]: 7.99e-11 kg; lognormal variance with pedigree 1.472, pedigree (1,1,5,5,1)
  (same comment as for Aluminium III)
- Manganese II [air, non-urban air or from high stacks]: 8.6e-11 kg; lognormal variance with pedigree 2.582, pedigree (1,1,5,5,1)
  (same comment as for Aluminium III)
- Manganese II [air, urban air close to ground]: 9.23e-16 kg; lognormal variance with pedigree 1.652, pedigree (1,1,5,5,1)
  (same comment as for Aluminium III)
- Mercury II [air, non-urban air or from high stacks]: 1.31e-11 kg; lognormal variance with pedigree 2.792, pedigree (1,1,5,5,1)
  (same comment as for Aluminium III)
- Mercury II [air, urban air close to ground]: 5.56e-17 kg; lognormal variance with pedigree 2.722, pedigree (1,1,5,5,1)
  (same comment as for Aluminium III)
- Methane, fossil [air, non-urban air or from high stacks]: 0.00316 kg; lognormal variance with pedigree 0.452, pedigree (1,1,5,5,1)
  (same comment as for Aluminium III)
- Methane, fossil [air, urban air close to ground]: 1.35e-6 kg; lognormal variance with pedigree 0.912, pedigree (1,1,5,5,1)
  (same comment as for Aluminium III)
- NMVOC, non-methane volatile organic compounds [air, non-urban air or from high stacks]: 2.21e-8 kg; lognormal variance with pedigree 0.452, pedigree (1,1,5,5,1)
  (same comment as for Aluminium III)
- NMVOC, non-methane volatile organic compounds [air, urban air close to ground]: 6.11e-9 kg; lognormal variance with pedigree 1.032, pedigree (1,1,5,5,1)
  (same comment as for Aluminium III)
- Nickel II [air, non-urban air or from high stacks]: 1.39e-13 kg; lognormal variance with pedigree 3.422, pedigree (1,1,5,5,1)
  (same comment as for Aluminium III)
- Nickel II [air, urban air close to ground]: 9.47e-18 kg; lognormal variance with pedigree 2.462, pedigree (1,1,5,5,1)
  (same comment as for Aluminium III)
- Nitrogen oxides [air, non-urban air or from high stacks]: 8.36e-9 kg; lognormal variance with pedigree 1.302, pedigree (1,1,5,5,1)
  (same comment as for Aluminium III)
- Nitrogen oxides [air, urban air close to ground]: 2.83e-7 kg; lognormal variance with pedigree 0.642, pedigree (1,1,5,5,1)
  (same comment as for Aluminium III)
- Particulate Matter, < 2.5 um [air, non-urban air or from high stacks]: 3.92e-7 kg; lognormal variance with pedigree 0.712, pedigree (1,1,5,5,1)
  (same comment as for Aluminium III)
- Selenium IV [air, non-urban air or from high stacks]: 5.31e-13 kg; lognormal variance with pedigree 3.252, pedigree (1,1,5,5,1)
  (same comment as for Aluminium III)
- Selenium IV [air, urban air close to ground]: 5.26e-18 kg; lognormal variance with pedigree 2.312, pedigree (1,1,5,5,1)
  (same comment as for Aluminium III)
- Sodium [air, non-urban air or from high stacks]: 1.45e-8 kg; lognormal variance with pedigree 1.912, pedigree (1,1,5,5,1)
  (same comment as for Aluminium III)
- Strontium [air, non-urban air or from high stacks]: 1.23e-11 kg; lognormal variance with pedigree 2.832, pedigree (1,1,5,5,1)
  (same comment as for Aluminium III)
- Strontium [air, urban air close to ground]: 2.43e-12 kg; lognormal variance with pedigree 1.802, pedigree (1,1,5,5,1)
  (same comment as for Aluminium III)
- Sulfur dioxide [air, non-urban air or from high stacks]: 5.57e-7 kg; lognormal variance with pedigree 1.522, pedigree (1,1,5,5,1)
  (same comment as for Aluminium III)
- Thallium I [air, non-urban air or from high stacks]: 5.58e-14 kg; lognormal variance with pedigree 3.542, pedigree (1,1,5,5,1)
  (same comment as for Aluminium III)
- Thallium I [air, urban air close to ground]: 1.1e-13 kg; lognormal variance with pedigree 2.502, pedigree (1,1,5,5,1)
  (same comment as for Aluminium III)
- Tin ion [air, non-urban air or from high stacks]: 5.62e-14 kg; lognormal variance with pedigree 3.522, pedigree (1,1,5,5,1)
  (same comment as for Aluminium III)
- Tin ion [air, urban air close to ground]: 1.73e-13 kg; lognormal variance with pedigree 2.502, pedigree (1,1,5,5,1)
  (same comment as for Aluminium III)
- Titanium ion [air, non-urban air or from high stacks]: 1.2e-10 kg; lognormal variance with pedigree 2.522, pedigree (1,1,5,5,1)
  (same comment as for Aluminium III)
- Titanium ion [air, urban air close to ground]: 2.36e-10 kg; lognormal variance with pedigree 1.492, pedigree (1,1,5,5,1)
  (same comment as for Aluminium III)
- Vanadium V [air, non-urban air or from high stacks]: 5.81e-10 kg; lognormal variance with pedigree 2.332, pedigree (1,1,5,5,1)
  (same comment as for Aluminium III)
- Vanadium V [air, urban air close to ground]: 1.15e-10 kg; lognormal variance with pedigree 1.292, pedigree (1,1,5,5,1)
  (same comment as for Aluminium III)
- Zinc II [air, non-urban air or from high stacks]: 3.6e-11 kg; lognormal variance with pedigree 2.692, pedigree (1,1,5,5,1)
  (same comment as for Aluminium III)
- Zinc II [air, urban air close to ground]: 1.83e-12 kg; lognormal variance with pedigree 1.652, pedigree (1,1,5,5,1)
  (same comment as for Aluminium III)
- Aluminium III [water, ground-, long-term]: 0.000192 kg; lognormal variance with pedigree 0.912, pedigree (1,1,5,5,1)
  Emissions from long-term leachate (>100a) directly from MSW landfill and indirectly via incineration of treatement sludge from leachate treatement. Uncertainty calculated depending on waste input and uncertainty of long-term transfer coefficents in landfill.
- Aluminium III [water, surface water]: 5.76e-9 kg; lognormal variance with pedigree 1.662, pedigree (1,1,5,5,1)
  (same comment as for Aluminium III)
- Ammonium [water, ground-, long-term]: 0.000516 kg; lognormal variance with pedigree 0.662, pedigree (1,1,5,5,1)
  (same comment as for Aluminium III)
- Ammonium [water, surface water]: 1.57e-5 kg; lognormal variance with pedigree 0.682, pedigree (1,1,5,5,1)
  (same comment as for Aluminium III)
- Antimony ion [water, ground-, long-term]: 1.01e-6 kg; lognormal variance with pedigree 2.622, pedigree (1,1,5,5,1)
  (same comment as for Aluminium III)
- Antimony ion [water, surface water]: 7.2e-9 kg; lognormal variance with pedigree 1.952, pedigree (1,1,5,5,1)
  (same comment as for Aluminium III)
- Arsenic ion [water, ground-, long-term]: 1.82e-6 kg; lognormal variance with pedigree 1.532, pedigree (1,1,5,5,1)
  (same comment as for Aluminium III)
- Arsenic ion [water, surface water]: 2.88e-9 kg; lognormal variance with pedigree 2.112, pedigree (1,1,5,5,1)
  (same comment as for Aluminium III)
- BOD5, Biological Oxygen Demand [water, ground-, long-term]: 0.054 kg; lognormal variance with pedigree 0.512, pedigree (1,1,5,5,1)
  (same comment as for Aluminium III)
- BOD5, Biological Oxygen Demand [water, surface water]: 4.75e-5 kg; lognormal variance with pedigree 0.862, pedigree (1,1,5,5,1)
  (same comment as for Aluminium III)
- Barium II [water, ground-, long-term]: 0.000239 kg; lognormal variance with pedigree 0.872, pedigree (1,1,5,5,1)
  (same comment as for Aluminium III)
- Barium II [water, surface water]: 1.65e-7 kg; lognormal variance with pedigree 1.262, pedigree (1,1,5,5,1)
  (same comment as for Aluminium III)
- Beryllium II [water, ground-, long-term]: 4.79e-7 kg; lognormal variance with pedigree 1.702, pedigree (1,1,5,5,1)
  (same comment as for Aluminium III)
- Beryllium II [water, surface water]: 1.42e-10 kg; lognormal variance with pedigree 2.432, pedigree (1,1,5,5,1)
  (same comment as for Aluminium III)
- Bromine [water, ground-, long-term]: 9.34e-6 kg; lognormal variance with pedigree 1.312, pedigree (1,1,5,5,1)
  (same comment as for Aluminium III)
- Bromine [water, surface water]: 2.41e-7 kg; lognormal variance with pedigree 1.572, pedigree (1,1,5,5,1)
  Emissions from short-term leachate treatment. Uncertainty calculated depending on waste input and uncertainty of transfer coefficents in landfill and wastewater treatment.
- COD, Chemical Oxygen Demand [water, ground-, long-term]: 0.228 kg; lognormal variance with pedigree 0.512, pedigree (1,1,5,5,1)
  (same comment as for Aluminium III)
- COD, Chemical Oxygen Demand [water, surface water]: 0.000151 kg; lognormal variance with pedigree 0.862, pedigree (1,1,5,5,1)
  (same comment as for Aluminium III)
- Cadmium II [water, ground-, long-term]: 3.39e-5 kg; lognormal variance with pedigree 1.152, pedigree (1,1,5,5,1)
  (same comment as for Aluminium III)
- Cadmium II [water, surface water]: 3.03e-8 kg; lognormal variance with pedigree 1.722, pedigree (1,1,5,5,1)
  (same comment as for Aluminium III)
- Calcium II [water, ground-, long-term]: 0.00259 kg; lognormal variance with pedigree 0.582, pedigree (1,1,5,5,1)
  (same comment as for Aluminium III)
- Calcium II [water, surface water]: 3.04e-6 kg; lognormal variance with pedigree 1.192, pedigree (1,1,5,5,1)
  (same comment as for Aluminium III)
- Chloride [water, ground-, long-term]: 0.00142 kg; lognormal variance with pedigree 0.652, pedigree (1,1,5,5,1)
  (same comment as for Aluminium III)
- Chloride [water, surface water]: 3.68e-5 kg; lognormal variance with pedigree 0.912, pedigree (1,1,5,5,1)
  (same comment as for Bromine)
- Chromium III [water, surface water]: 2.23e-12 kg; lognormal variance with pedigree 2.252, pedigree (1,1,5,5,1)
  (same comment as for Aluminium III)
- Chromium VI [water, ground-, long-term]: 5.65e-8 kg; lognormal variance with pedigree 8.562, pedigree (1,1,5,5,1)
  (same comment as for Aluminium III)
- Chromium VI [water, surface water]: 7.44e-10 kg; lognormal variance with pedigree 2.222, pedigree (1,1,5,5,1)
  (same comment as for Aluminium III)
- Cobalt II [water, ground-, long-term]: 1.68e-6 kg; lognormal variance with pedigree 1.542, pedigree (1,1,5,5,1)
  (same comment as for Aluminium III)
- Cobalt II [water, surface water]: 2.74e-9 kg; lognormal variance with pedigree 2.052, pedigree (1,1,5,5,1)
  (same comment as for Aluminium III)
- Copper ion [water, ground-, long-term]: 4.14e-5 kg; lognormal variance with pedigree 1.122, pedigree (1,1,5,5,1)
  (same comment as for Aluminium III)
- Copper ion [water, surface water]: 5.25e-10 kg; lognormal variance with pedigree 2.172, pedigree (1,1,5,5,1)
  (same comment as for Aluminium III)
- DOC, Dissolved Organic Carbon [water, ground-, long-term]: 0.209 kg; lognormal variance with pedigree 0.512, pedigree (1,1,5,5,1)
  (same comment as for Aluminium III)
- DOC, Dissolved Organic Carbon [water, surface water]: 3.67e-5 kg; lognormal variance with pedigree 0.862, pedigree (1,1,5,5,1)
  (same comment as for Aluminium III)
- Fluoride [water, ground-, long-term]: 1.43e-5 kg; lognormal variance with pedigree 1.262, pedigree (1,1,5,5,1)
  (same comment as for Aluminium III)
- Fluoride [water, surface water]: 1.06e-8 kg; lognormal variance with pedigree 1.952, pedigree (1,1,5,5,1)
  (same comment as for Bromine)
- Hydrogen sulfide [water, ground-, long-term]: 3.1e-5 kg; lognormal variance with pedigree 0.812, pedigree (1,1,5,5,1)
  (same comment as for Aluminium III)
- Iron ion [water, ground-, long-term]: 0.000108 kg; lognormal variance with pedigree 2.412, pedigree (1,1,5,5,1)
  (same comment as for Aluminium III)
- Iron ion [water, surface water]: 1.07e-7 kg; lognormal variance with pedigree 1.552, pedigree (1,1,5,5,1)
  (same comment as for Aluminium III)
- Lead II [water, ground-, long-term]: 2.26e-5 kg; lognormal variance with pedigree 1.202, pedigree (1,1,5,5,1)
  (same comment as for Aluminium III)
- Lead II [water, surface water]: 1.46e-10 kg; lognormal variance with pedigree 2.232, pedigree (1,1,5,5,1)
  (same comment as for Aluminium III)
- Magnesium [water, ground-, long-term]: 9.54e-5 kg; lognormal variance with pedigree 1.012, pedigree (1,1,5,5,1)
  (same comment as for Aluminium III)
- Magnesium [water, surface water]: 5.34e-7 kg; lognormal variance with pedigree 1.432, pedigree (1,1,5,5,1)
  (same comment as for Aluminium III)
- Manganese II [water, ground-, long-term]: 2.92e-5 kg; lognormal variance with pedigree 1.152, pedigree (1,1,5,5,1)
  (same comment as for Aluminium III)
- Manganese II [water, surface water]: 1.75e-7 kg; lognormal variance with pedigree 1.512, pedigree (1,1,5,5,1)
  (same comment as for Aluminium III)
- Mercury II [water, ground-, long-term]: 4.79e-8 kg; lognormal variance with pedigree 1.962, pedigree (1,1,5,5,1)
  (same comment as for Aluminium III)
- Mercury II [water, surface water]: 1.04e-11 kg; lognormal variance with pedigree 2.662, pedigree (1,1,5,5,1)
  (same comment as for Aluminium III)
- Nickel II [water, ground-, long-term]: 9.59e-7 kg; lognormal variance with pedigree 1.612, pedigree (1,1,5,5,1)
  (same comment as for Aluminium III)
- Nickel II [water, surface water]: 3.38e-10 kg; lognormal variance with pedigree 2.342, pedigree (1,1,5,5,1)
  (same comment as for Aluminium III)
- Nitrate [water, ground-, long-term]: 5.43e-5 kg; lognormal variance with pedigree 0.662, pedigree (1,1,5,5,1)
  (same comment as for Aluminium III)
- Nitrate [water, surface water]: 5.72e-5 kg; lognormal variance with pedigree 0.612, pedigree (1,1,5,5,1)
  (same comment as for Aluminium III)
- Nitrite [water, ground-, long-term]: 2.81e-5 kg; lognormal variance with pedigree 0.662, pedigree (1,1,5,5,1)
  (same comment as for Aluminium III)
- Nitrite [water, surface water]: 3.3e-7 kg; lognormal variance with pedigree 0.932, pedigree (1,1,5,5,1)
  (same comment as for Aluminium III)
- Nitrogen [water, surface water]: 4.25e-7 kg; lognormal variance with pedigree 0.622, pedigree (1,1,5,5,1)
  (same comment as for Aluminium III)
- Nitrogen, organic bound [water, ground-, long-term]: 0.000843 kg; lognormal variance with pedigree 0.662, pedigree (1,1,5,5,1)
  (same comment as for Aluminium III)
- Selenium IV [water, ground-, long-term]: 5.68e-7 kg; lognormal variance with pedigree 1.922, pedigree (1,1,5,5,1)
  (same comment as for Aluminium III)
- Selenium IV [water, surface water]: 1.42e-9 kg; lognormal variance with pedigree 2.172, pedigree (1,1,5,5,1)
  (same comment as for Aluminium III)
- Sodium I [water, ground-, long-term]: 0.00135 kg; lognormal variance with pedigree 0.652, pedigree (1,1,5,5,1)
  (same comment as for Aluminium III)
- Sodium I [water, surface water]: 5.82e-5 kg; lognormal variance with pedigree 0.862, pedigree (1,1,5,5,1)
  (same comment as for Bromine)
- Strontium [water, ground-, long-term]: 8.48e-5 kg; lognormal variance with pedigree 1.022, pedigree (1,1,5,5,1)
  (same comment as for Aluminium III)
- Strontium [water, surface water]: 2.51e-8 kg; lognormal variance with pedigree 1.752, pedigree (1,1,5,5,1)
  (same comment as for Aluminium III)
- Sulfate [water, ground-, long-term]: 0.00119 kg; lognormal variance with pedigree 0.812, pedigree (1,1,5,5,1)
  (same comment as for Aluminium III)
- Sulfate [water, surface water]: 4.86e-6 kg; lognormal variance with pedigree 1.292, pedigree (1,1,5,5,1)
  (same comment as for Bromine)
- TOC, Total Organic Carbon [water, ground-, long-term]: 0.209 kg; lognormal variance with pedigree 0.512, pedigree (1,1,5,5,1)
  (same comment as for Aluminium III)
- TOC, Total Organic Carbon [water, surface water]: 3.82e-5 kg; lognormal variance with pedigree 0.862, pedigree (1,1,5,5,1)
  (same comment as for Aluminium III)
- Thallium I [water, ground-, long-term]: 3.83e-7 kg; lognormal variance with pedigree 1.732, pedigree (1,1,5,5,1)
  (same comment as for Aluminium III)
- Thallium I [water, surface water]: 1.13e-10 kg; lognormal variance with pedigree 2.462, pedigree (1,1,5,5,1)
  (same comment as for Aluminium III)
- Tin ion [water, ground-, long-term]: 3.81e-6 kg; lognormal variance with pedigree 1.432, pedigree (1,1,5,5,1)
  (same comment as for Aluminium III)
- Tin ion [water, surface water]: 9.4e-11 kg; lognormal variance with pedigree 2.462, pedigree (1,1,5,5,1)
  (same comment as for Aluminium III)
- Titanium ion [water, ground-, long-term]: 0.000959 kg; lognormal variance with pedigree 0.702, pedigree (1,1,5,5,1)
  (same comment as for Aluminium III)
- Titanium ion [water, surface water]: 2.43e-7 kg; lognormal variance with pedigree 1.442, pedigree (1,1,5,5,1)
  (same comment as for Aluminium III)
- Vanadium V [water, ground-, long-term]: 0.000642 kg; lognormal variance with pedigree 0.982, pedigree (1,1,5,5,1)
  (same comment as for Aluminium III)
- Vanadium V [water, surface water]: 1.18e-6 kg; lognormal variance with pedigree 1.242, pedigree (1,1,5,5,1)
  (same comment as for Aluminium III)
- Zinc II [water, ground-, long-term]: 0.000282 kg; lognormal variance with pedigree 0.852, pedigree (1,1,5,5,1)
  (same comment as for Aluminium III)
- Zinc II [water, surface water]: 5.01e-8 kg; lognormal variance with pedigree 1.592, pedigree (1,1,5,5,1)
  (same comment as for Aluminium III)

## Sampling procedure
Landfill model based on observed leachate concentrations in literature. Extrapolated to 60'000 years heeding chemical characteristics. Initial waste composition from various literature sources.

## Extrapolations
This dataset has been copied from an original dataset covering the geography CH. The uncertainty has been adjusted accordingly.

## Review by Niels Jungbluth 2003-07-21
Passed. Calculation for standard deviation 95 of, i.e., infrastructure,
land occupation, transport services or other services can differ from
standard Pedigree approach used in this project and figures obtained by
this procedure.
