# treatment of waste paperboard, sanitary landfill

Dataset: EcoSpold 2, unit process
Geography: RoW
Time period: 1994-01-01 to 2022-12-31
Technology level: current
Classification: ISIC rev.4 ecoinvent: 3821:Treatment and disposal of non-hazardous waste
Classification: EcoSpold01Categories: waste management/sanitary landfill
Tags: ConvertedDataset; Treatment
Scenario: Business-as-Usual
System model: Substitution, consequential, long-term
Generated by: Gabor Doka (obsolete)
Published in: Doka G. 2007
Database: ecoinvent
isCopyrightProtected: true

## General comment
Inventoried waste contains 100% cardboard; .
waste composition (wet, in ppm): upper heating value 17.91 MJ/kg; lower heating value 15.92 MJ/kg; H2O 104370; O 392680; H 57791; C 433270; S 1776.8; N 2583.5; P n.a.; B n.a.; Cl 7173.3; Br n.a.; F n.a.; I n.a.; Ag n.a.; As 1.168; Ba 57.193; Cd 0.93313; Co 0.91806; Cr 9.2403; Cu 35.113; Hg 0.30131; Mn 95.196; Mo n.a.; Ni 10.64; Pb 28.963; Sb 0.0046044; Se 3.1073; Sn 6.7521; V n.a.; Zn 63.333; Be 1.1299; Sc n.a.; Sr 45.009; Ti n.a.; Tl n.a.; W n.a.; Si n.a.; Fe n.a.; Ca n.a.; Al n.a.; K n.a.; Mg n.a.; Na n.a.;
Share of carbon in waste that is biogenic 100%.
Overall degradability of waste during 100 years: 32.44%.
[This dataset was already contained in the ecoinvent database version 2. It was not individually updated during the transfer to ecoinvent version 3. Life Cycle Impact Assessment results may still have changed, as they are affected by changes in the supply chain, i.e. in other datasets. This dataset was generated following the ecoinvent quality guidelines for version 2. It may have been subject to central changes described in the ecoinvent version 3 change report (http://www.ecoinvent.org/database/ecoinvent-version-3/reports-of-changes/), and the results of the central updates were reviewed extensively. The changes added e.g. consistent water flows and other information throughout the database. The documentation of this dataset can be found in the ecoinvent reports of version 2, which are still available via the ecoinvent website. The change report linked above covers all central changes that were made during the conversion process.]

## Included activities end
Waste-specific short-term emissions to air via landfill gas incineration and landfill leachate. Burdens from treatment of short-term leachate (0-100a) in wastewater treatment plant (including WWTP sludge disposal in municipal incinerator). Long-term emissions from landfill to groundwater (after base lining failure).

## Geography
Technology encountered in Switzerland in 2000. Landfill includes base seal, leachate collection system, treatment of leachate in municipal wastewater treatment plant.

## Technology
Swiss municipal sanitary landfill for biogenic or untreated municipal waste ('reactive organic landfill'). Landfill gas and leachate collection system. Recultivation and monitoring for 150 years after closure.

## Reference product
- waste paperboard: -1 kg; By-product classification Waste; CPC 39240: Waste and scrap of paper or paperboard
  EcoSpold01Location=CH
  production volume 1.63686e7 kg
    Calculated. The values has been calculated form total production of paper and paperboard (link:http://www.erpa.info/images/Special_Recycling_2005_statistics.pdf, accessed 20150930), Paperboard is 51.8% of paper and paperboard global production (link: http://www.paperonweb.com/World.htm, accessed 20150930). The proportion of paperboard that goes to landfill is 29.41% (link: http://www.erpa.info/images/Special_Recycling_2005_statistics.pdf, accessed 20150930). Of the waste that goes to landfill 0.04%goes to sanitary landfill (calculated from share of sanitary and inert material landfills reported in Ecoinvent v2 "Life cycle inventories of waste treatment services. Part II landfills underground deposit landfarming")
  property carbon content, non-fossil 0.483259
    C content was calculated for 1 kg DM, using data in Tab A.3, ecoinvent v2.2 report 13_I.
  property heating value, net 15.92 MJ
    Value taken from the general comment of the treatment dataset.
  property price 0 EUR2005
    Waste products are assigned a price of zero as they are assumed to require further treatment.
  properties: carbon allocation 0.38854 kg, carbon content 0.483259, carbon content, fossil 0, dry mass 0.804 kg, water content 0.243781, water in wet mass 0.196 kg, wet mass 1 kg

## Inputs from technosphere
- ammonia, anhydrous, liquid: 8.25093e-8, 1.67873e-8, 1.60167e-7, 6.16962e-7, 7.50453e-8, 4.96958e-8, 1.77535e-6, 1.6348e-7 kg (8 suppliers, which the file names only by identifier); sum of these 2.94e-6 kg; lognormal variance with pedigree 0.482, pedigree (1,1,5,5,1)
  burden from incineration of sludge from wastewater treatment of the short-term leachate (0-100a). uncertainty is calculated from uncertainties in waste composition and transfer coefficients in incinerator and uncertainty of waste decomposition and short-term leaching in sanitary landfill
  EcoSpold01Location=CH
  properties: dry mass 1 kg, wet mass 1 kg
- cement, unspecified: 4.95597e-8, 8.1325e-8, 3.08852e-7, 3.84055e-9, 7.63309e-9, 1.16697e-8, 3.11031e-6, 9.69453e-9, 1.87117e-7 kg (9 suppliers, which the file names only by identifier); sum of these 3.77e-6 kg; lognormal variance with pedigree 0.412, pedigree (1,1,5,5,1)
  (same comment as for ammonia, anhydrous, liquid)
  properties: dry mass 1 kg, wet mass 1 kg
- chemical, inorganic: 1.27e-9 kg; lognormal variance with pedigree 0.552, pedigree (1,1,5,5,1)
  burden from incineration of sludge from wastewater treatment of the short-term leachate (0-100a). uncertainty is calculated from uncertainties in waste composition and transfer coefficients in incinerator and uncertainty of waste decomposition and short-term leaching in sanitary landfill
  EcoSpold01Location=GLO
  properties: carbon content, fossil 0.003, dry mass 1 kg, wet mass 1 kg
  note on carbon content, fossil: This dataset is an unweighted average of 20 inorganic substances (listed in Tab 88.1, ecoinvent v2.2 report 8, part II), being part of the top100 chemicals included in this database. The C-content has also been calculated as an unweighted average of the C content of the substances composing this dataset.
- chemical, organic: 9.58e-8 kg; lognormal variance with pedigree 1.562, pedigree (1,1,5,5,1)
  EcoSpold01Location=GLO
  burden from incineration of sludge from wastewater treatment of the short-term leachate (0-100a). uncertainty is calculated from uncertainties in waste composition and transfer coefficients in incinerator and uncertainty of waste decomposition and short-term leaching in sanitary landfill
  properties: carbon content, fossil 0.628, dry mass 1 kg, heating value, net 19.03 MJ, wet mass 1 kg
  note on carbon content, fossil: This dataset is an unweighted average of 20 organic substances (listed in Tab 88.1, ecoinvent v2.2 report 8, part II), being part of the top100 chemicals included in this database. The C-content has also been calculated as an unweighted average of the C content of the substances composing this dataset.
- chromium oxide, flakes: 1.72e-9 kg; lognormal variance with pedigree 0.83, pedigree (5,5,5,5,5)
  burden from incineration of sludge from wastewater treatment of the short-term leachate (0-100a). Proxy for vanadium pentoxide V2O5 in SCR catalyst, uncertainty calculated from uncertainty in average DeNOx input, uncertainty in the share of thermal NOx, uncertainty of nitrogen content in average municipal waste and the unertainty in nitrogen content in *this* waste and uncertainty of waste decomposition and short-term leaching in sanitary landfill
  EcoSpold01Location=RER
  Uncertainty: . Proxy for vanadium pentoxide V2O5 in SCR catalyst, uncertainty calculated from uncertainty in average DeNOx input, uncertainty in the share of thermal NOx, uncertainty of nitrogen content in average municipal waste and the unertainty in nitrogen content in *this* waste and uncertainty of waste decomposition and short-term leaching in sanitary landfill
  properties: dry mass 1 kg, wet mass 1 kg
- electricity, high voltage: 3.11474e-5, 1.15086e-6, 1.15066e-6, 0.000255411, 5.75764e-6, 2.15146e-5, 3.22299e-5, 1.46382e-5 kWh (8 suppliers, which the file names only by identifier); sum of these 0.000363 kWh; lognormal variance with pedigree 0.732, pedigree (1,1,5,5,1)
  (same comment as for ammonia, anhydrous, liquid)
- electricity, low voltage: 0.00013926, 0.00838111, 0.000934705, 0.00116391, 0.00100399, 3.50071e-5, 0.000470844, 0.000171165 kWh (8 suppliers, which the file names only by identifier); sum of these 0.0123 kWh; lognormal variance with pedigree 0.41, pedigree (5,5,5,5,5)
  burden from wastewater treatment of the short-term leachate (0-100a). Uncertainty calculated from unertainty of the waste composition of this waste, uncertainty in waste decomposition and short-term leaching in sanitary landfill
  EcoSpold01Location=CH
  Uncertainty: . Uncertainty calculated from unertainty of the waste composition of this waste, uncertainty in waste decomposition and short-term leaching in sanitary landfill
- heat, central or small-scale, other than natural gas: 0.000152893, 3.26868e-7 MJ (2 suppliers, which the file names only by identifier); sum of these 0.00015322 MJ; lognormal variance with pedigree 0.54, pedigree (5,5,5,5,5)
  EcoSpold01Location=CH
  burden from wastewater treatment of the short-term leachate (0-100a). Uncertainty calculated from unertainty of the waste composition of this waste, uncertainty in waste decomposition and short-term leaching in sanitary landfill
  Uncertainty: . Uncertainty calculated from unertainty of the waste composition of this waste, uncertainty in waste decomposition and short-term leaching in sanitary landfill
  properties: heating value, net 1 MJ
- heat, district or industrial, natural gas: 4.50661e-5, 0.000127433, 0.000297001 MJ (3 suppliers, which the file names only by identifier); sum of these 0.0004695 MJ; lognormal variance with pedigree 0.482, pedigree (1,1,5,5,1)
  EcoSpold01Location=RER
  burden from incineration of sludge from wastewater treatment of the short-term leachate (0-100a). uncertainty is calculated from uncertainties in waste composition and transfer coefficients in incinerator and uncertainty of waste decomposition and short-term leaching in sanitary landfill
  properties: heating value, net 1 MJ
- heat, district or industrial, other than natural gas: 0.00175713, 3.06826e-6, 0.000359805 MJ (3 suppliers, which the file names only by identifier); sum of these 0.00212 MJ; lognormal variance with pedigree 0.362, pedigree (1,1,5,5,1)
  (same comment as for ammonia, anhydrous, liquid)
  properties: heating value, net 1 MJ
- hydrochloric acid, without water, in 30% solution state: 7.64e-10 kg; lognormal variance with pedigree 0.552, pedigree (1,1,5,5,1)
  (same comment as for heat, district or industrial, natural gas)
  properties: dry mass 1 kg, heating value, net 3.32 MJ, wet mass 1 kg
- iron (III) chloride, without water, in 40% solution state: 1.89e-7 kg; lognormal variance with pedigree 0.682, pedigree (1,1,5,5,1)
  EcoSpold01Location=CH
  burden from incineration of sludge from wastewater treatment of the short-term leachate (0-100a). uncertainty is calculated from uncertainties in waste composition and transfer coefficients in incinerator and uncertainty of waste decomposition and short-term leaching in sanitary landfill
  properties: dry mass 1 kg, wet mass 1 kg
- municipal waste incineration facility: 6.31e-13 unit; lognormal variance with pedigree 0.352, pedigree (1,1,5,5,1)
  EcoSpold01Location=CH
  Burden from incineration of sludge from wastewater treatment of the short-term leachate (0-100a).
- process-specific burdens, municipal waste incineration: 0.000712844, 0.00180716 kg (2 suppliers, which the file names only by identifier); sum of these 0.00252 kg; lognormal variance with pedigree 0.352, pedigree (1,1,5,5,1)
  (same comment as for municipal waste incineration facility)
- process-specific burdens, residual material landfill: 2.66468e-6, 6.75532e-6 kg (2 suppliers, which the file names only by identifier); sum of these 9.42e-6 kg; lognormal variance with pedigree 0.412, pedigree (1,1,5,5,1)
  (same comment as for ammonia, anhydrous, liquid)
- process-specific burdens, sanitary landfill: 1 kg; lognormal variance with pedigree 0.042, pedigree (1,1,5,5,1)
  demands per kilogram waste. uncertainty is heeded in the module
  EcoSpold01Location=CH
- process-specific burdens, slag landfill: 1.3578e-5, 3.4422e-5 kg (2 suppliers, which the file names only by identifier); sum of these 4.8e-5 kg; lognormal variance with pedigree 0.562, pedigree (1,1,5,5,1)
  (same comment as for iron (III) chloride, without water, in 40% solution state)
- quicklime, milled, packed: 2.65e-8 kg; lognormal variance with pedigree 0.412, pedigree (1,1,5,5,1)
  (same comment as for ammonia, anhydrous, liquid)
  properties: dry mass 0.99 kg, water content 0.010101, wet mass 1 kg
- residual material landfill: 1.96e-14 unit; lognormal variance with pedigree 0.412, pedigree (1,1,5,5,1)
  (same comment as for ammonia, anhydrous, liquid)
- sanitary landfill facility: 5.56e-10 unit; lognormal variance with pedigree 0.042, pedigree (1,1,5,5,1)
  EcoSpold01Location=CH
  demands per kilogram waste. uncertainty is heeded in the module
- sewer grid, 5E9l/year, 110 km: 5.45e-10 km; lognormal variance with pedigree 0.2106, pedigree (5,5,5,5,5)
  (same comment as for electricity, low voltage)
- slag landfill: 8.52e-14 unit; lognormal variance with pedigree 0.562, pedigree (1,1,5,5,1)
  (same comment as for ammonia, anhydrous, liquid)
- sodium hydroxide, without water, in 50% solution state: 1.46e-7 kg; lognormal variance with pedigree 0.402, pedigree (1,1,5,5,1)
  burden from incineration of sludge from wastewater treatment of the short-term leachate (0-100a). uncertainty is calculated from uncertainties in waste composition and transfer coefficients in incinerator and uncertainty of waste decomposition and short-term leaching in sanitary landfill
  EcoSpold01Location=RER
  properties: dry mass 1 kg, heating value, net 3.03 MJ, wet mass 1 kg
- titanium dioxide: 8.43e-8 kg; lognormal variance with pedigree 0.722, pedigree (1,1,5,5,1)
  (same comment as for sodium hydroxide, without water, in 50% solution state)
  properties: dry mass 1 kg, wet mass 1 kg
- waste cement, hydrated: -2.66468e-6, -6.75532e-6 kg (2 suppliers, which the file names only by identifier); sum of these -9.42e-6 kg
  (same comment as for iron (III) chloride, without water, in 40% solution state)
  production volume
    Calculated from the production volume of waste packaging cardboard, 19.6% water in proportion to the respective output amounts.
  properties: dry mass 1 kg, wet mass 1 kg
- waste graphical paper: -2.59179e-7, -4.09465e-6, -9.36524e-7, -9.13189e-8, -1.69726e-6, -1.69041e-7, -2.26629e-8, -3.15294e-5 kg (8 suppliers, which the file names only by identifier); sum of these -3.88e-5 kg
  burden from wastewater treatment of the short-term leachate (0-100a). Uncertainty calculated from unertainty of the waste composition of this waste, uncertainty in waste decomposition and short-term leaching in sanitary landfill
  EcoSpold01Location=CH
  production volume
    (same comment as for waste cement, hydrated)
  properties: carbon content, non-fossil 0.454955, dry mass 0.888 kg, heating value, net 14.12 MJ, water content 0.126126, wet mass 1 kg
  note on heating value, net: Value taken from the general comment of the treatment dataset.
- waste plastic, mixture: -2.18105e-8, -4.31618e-6, -1.19116e-7, -1.13112e-7, -2.88391e-7, -3.67759e-6, -4.81214e-8, -3.02157e-5 kg (8 suppliers, which the file names only by identifier); sum of these -3.88e-5 kg
  EcoSpold01Location=CH
  burden from wastewater treatment of the short-term leachate (0-100a). Uncertainty calculated from unertainty of the waste composition of this waste, uncertainty in waste decomposition and short-term leaching in sanitary landfill
  production volume
    (same comment as for waste cement, hydrated)
  properties: carbon content, fossil 0.747344, dry mass 0.847 kg, heating value, net 30.79 MJ, water content 0.180638, wet mass 1 kg
  note on carbon content, fossil: C content in 1 kg DM was calculated using data in Tab A.2, ecoinvent v2.2 report 13_I
- wastewater treatment facility, capacity 5E9l/year: 1.42e-11 unit; lognormal variance with pedigree 0.2106, pedigree (5,5,5,5,5)
  (same comment as for electricity, low voltage)

## Emissions to nature
- Ammonia [air, urban air close to ground]: 1.87e-6 kg; lognormal variance with pedigree 0.402, pedigree (1,1,5,5,1)
  Emissions from short-term leachate treatment and incineration of resulting sludge. Uncertainty calculated depending on waste input and uncertainty of transfer coefficents in landfill, wastewater treatment and incineration model.
- Antimony ion [air, non-urban air or from high stacks]: 3.94e-14 kg; lognormal variance with pedigree 3.242, pedigree (1,1,5,5,1)
  burden from direct release or incineration of landfill biogas. Uncertainty calculated from unertainty of the waste composition of this waste, uncertainty in waste decomposition and short-term leaching in sanitary landfill
- Antimony ion [air, urban air close to ground]: 7.76e-15 kg; lognormal variance with pedigree 2.832, pedigree (1,1,5,5,1)
  (same comment as for Ammonia)
- Arsenic ion [air, non-urban air or from high stacks]: 9.54e-10 kg; lognormal variance with pedigree 2.272, pedigree (1,1,5,5,1)
  (same comment as for Antimony ion)
- Arsenic ion [air, urban air close to ground]: 1.92e-11 kg; lognormal variance with pedigree 1.802, pedigree (1,1,5,5,1)
  (same comment as for Ammonia)
- Barium II [air, non-urban air or from high stacks]: 5.31e-9 kg; lognormal variance with pedigree 2.042, pedigree (1,1,5,5,1)
  (same comment as for Antimony ion)
- Barium II [air, urban air close to ground]: 2e-8 kg; lognormal variance with pedigree 1.142, pedigree (1,1,5,5,1)
  (same comment as for Ammonia)
- Beryllium II [air, non-urban air or from high stacks]: 5.33e-12 kg; lognormal variance with pedigree 2.952, pedigree (1,1,5,5,1)
  (same comment as for Antimony ion)
- Beryllium II [air, urban air close to ground]: 1.05e-11 kg; lognormal variance with pedigree 1.932, pedigree (1,1,5,5,1)
  (same comment as for Ammonia)
- Cadmium II [air, non-urban air or from high stacks]: 3.55e-10 kg; lognormal variance with pedigree 2.402, pedigree (1,1,5,5,1)
  (same comment as for Antimony ion)
- Cadmium II [air, urban air close to ground]: 1.46e-12 kg; lognormal variance with pedigree 1.852, pedigree (1,1,5,5,1)
  (same comment as for Ammonia)
- Carbon dioxide, non-fossil [air, non-urban air or from high stacks]: 0.352 kg; lognormal variance with pedigree 0.102, pedigree (1,1,5,5,1)
  (same comment as for Antimony ion)
- Carbon dioxide, non-fossil [air, urban air close to ground]: 0.0118 kg; lognormal variance with pedigree 0.432, pedigree (1,1,5,5,1)
  (same comment as for Ammonia)
- Carbon monoxide, non-fossil [air, non-urban air or from high stacks]: 1.99e-5 kg; lognormal variance with pedigree 0.752, pedigree (1,1,5,5,1)
  (same comment as for Antimony ion)
- Carbon monoxide, non-fossil [air, urban air close to ground]: 7.57e-6 kg; lognormal variance with pedigree 0.502, pedigree (1,1,5,5,1)
  (same comment as for Ammonia)
- Chromium III [air, non-urban air or from high stacks]: 8.54e-12 kg; lognormal variance with pedigree 2.892, pedigree (1,1,5,5,1)
  (same comment as for Antimony ion)
- Chromium III [air, urban air close to ground]: 1.24e-15 kg; lognormal variance with pedigree 1.922, pedigree (1,1,5,5,1)
  (same comment as for Ammonia)
- Cobalt II [air, non-urban air or from high stacks]: 2.39e-11 kg; lognormal variance with pedigree 2.762, pedigree (1,1,5,5,1)
  (same comment as for Antimony ion)
- Cobalt II [air, urban air close to ground]: 1.5e-15 kg; lognormal variance with pedigree 1.862, pedigree (1,1,5,5,1)
  (same comment as for Ammonia)
- Copper ion [air, non-urban air or from high stacks]: 1.59e-11 kg; lognormal variance with pedigree 2.802, pedigree (1,1,5,5,1)
  (same comment as for Antimony ion)
- Copper ion [air, urban air close to ground]: 3.05e-13 kg; lognormal variance with pedigree 1.812, pedigree (1,1,5,5,1)
  (same comment as for Ammonia)
- Cyanide [air, urban air close to ground]: 5.25e-8 kg; lognormal variance with pedigree 0.492, pedigree (1,1,5,5,1)
  (same comment as for Ammonia)
- Dinitrogen monoxide [air, urban air close to ground]: 5.15e-6 kg; lognormal variance with pedigree 0.352, pedigree (1,1,5,5,1)
  (same comment as for Ammonia)
- Hydrochloric acid [air, non-urban air or from high stacks]: 8.45e-5 kg; lognormal variance with pedigree 0.802, pedigree (1,1,5,5,1)
  (same comment as for Antimony ion)
- Lead II [air, non-urban air or from high stacks]: 1.85e-11 kg; lognormal variance with pedigree 2.792, pedigree (1,1,5,5,1)
  (same comment as for Antimony ion)
- Lead II [air, urban air close to ground]: 1.83e-12 kg; lognormal variance with pedigree 1.802, pedigree (1,1,5,5,1)
  (same comment as for Ammonia)
- Manganese II [air, non-urban air or from high stacks]: 8.84e-9 kg; lognormal variance with pedigree 1.972, pedigree (1,1,5,5,1)
  (same comment as for Antimony ion)
- Manganese II [air, urban air close to ground]: 9.48e-14 kg; lognormal variance with pedigree 1.182, pedigree (1,1,5,5,1)
  (same comment as for Ammonia)
- Mercury II [air, non-urban air or from high stacks]: 2.68e-9 kg; lognormal variance with pedigree 2.142, pedigree (1,1,5,5,1)
  (same comment as for Antimony ion)
- Mercury II [air, urban air close to ground]: 1.13e-14 kg; lognormal variance with pedigree 2.092, pedigree (1,1,5,5,1)
  (same comment as for Ammonia)
- Methane, non-fossil [air, non-urban air or from high stacks]: 0.054 kg; lognormal variance with pedigree 0.142, pedigree (1,1,5,5,1)
  (same comment as for Antimony ion)
- Methane, non-fossil [air, urban air close to ground]: 2.3e-5 kg; lognormal variance with pedigree 0.492, pedigree (1,1,5,5,1)
  (same comment as for Ammonia)
- NMVOC, non-methane volatile organic compounds [air, non-urban air or from high stacks]: 3.77e-7 kg; lognormal variance with pedigree 0.142, pedigree (1,1,5,5,1)
  (same comment as for Antimony ion)
- NMVOC, non-methane volatile organic compounds [air, urban air close to ground]: 1.05e-7 kg; lognormal variance with pedigree 0.602, pedigree (1,1,5,5,1)
  (same comment as for Ammonia)
- Nickel II [air, non-urban air or from high stacks]: 5.02e-11 kg; lognormal variance with pedigree 2.662, pedigree (1,1,5,5,1)
  (same comment as for Antimony ion)
- Nickel II [air, urban air close to ground]: 3.41e-15 kg; lognormal variance with pedigree 1.702, pedigree (1,1,5,5,1)
  (same comment as for Ammonia)
- Nitrogen oxides [air, non-urban air or from high stacks]: 5.4e-7 kg; lognormal variance with pedigree 0.802, pedigree (1,1,5,5,1)
  (same comment as for Antimony ion)
- Nitrogen oxides [air, urban air close to ground]: 1.83e-5 kg; lognormal variance with pedigree 0.392, pedigree (1,1,5,5,1)
  (same comment as for Ammonia)
- Particulate Matter, < 2.5 um [air, non-urban air or from high stacks]: 6.7e-6 kg; lognormal variance with pedigree 0.402, pedigree (1,1,5,5,1)
  (same comment as for Antimony ion)
- Selenium IV [air, non-urban air or from high stacks]: 2.66e-11 kg; lognormal variance with pedigree 2.742, pedigree (1,1,5,5,1)
  (same comment as for Antimony ion)
- Selenium IV [air, urban air close to ground]: 2.63e-16 kg; lognormal variance with pedigree 1.832, pedigree (1,1,5,5,1)
  (same comment as for Ammonia)
- Strontium [air, non-urban air or from high stacks]: 2.12e-10 kg; lognormal variance with pedigree 2.462, pedigree (1,1,5,5,1)
  (same comment as for Antimony ion)
- Strontium [air, urban air close to ground]: 4.18e-11 kg; lognormal variance with pedigree 1.462, pedigree (1,1,5,5,1)
  (same comment as for Ammonia)
- Sulfur dioxide [air, non-urban air or from high stacks]: 7.52e-5 kg; lognormal variance with pedigree 0.902, pedigree (1,1,5,5,1)
  (same comment as for Antimony ion)
- Tin ion [air, non-urban air or from high stacks]: 3.23e-12 kg; lognormal variance with pedigree 3.022, pedigree (1,1,5,5,1)
  (same comment as for Antimony ion)
- Tin ion [air, urban air close to ground]: 9.96e-12 kg; lognormal variance with pedigree 1.972, pedigree (1,1,5,5,1)
  (same comment as for Ammonia)
- Zinc II [air, non-urban air or from high stacks]: 2.16e-10 kg; lognormal variance with pedigree 2.462, pedigree (1,1,5,5,1)
  (same comment as for Antimony ion)
- Zinc II [air, urban air close to ground]: 1.1e-11 kg; lognormal variance with pedigree 1.442, pedigree (1,1,5,5,1)
  (same comment as for Ammonia)
- Ammonium [water, ground-, long-term]: 0.0002 kg; lognormal variance with pedigree 0.622, pedigree (1,1,5,5,1)
  Emissions from long-term leachate (>100a) directly from MSW landfill and indirectly via incineration of treatement sludge from leachate treatement. Uncertainty calculated depending on waste input and uncertainty of long-term transfer coefficents in landfill.
- Ammonium [water, surface water]: 0.00101 kg; lognormal variance with pedigree 0.412, pedigree (1,1,5,5,1)
  (same comment as for Ammonia)
- Antimony ion [water, ground-, long-term]: 4.96e-10 kg; lognormal variance with pedigree 3.192, pedigree (1,1,5,5,1)
  (same comment as for Ammonium)
- Antimony ion [water, surface water]: 1.07e-10 kg; lognormal variance with pedigree 2.192, pedigree (1,1,5,5,1)
  (same comment as for Ammonia)
- Arsenic ion [water, ground-, long-term]: 1.11e-6 kg; lognormal variance with pedigree 1.572, pedigree (1,1,5,5,1)
  (same comment as for Ammonium)
- Arsenic ion [water, surface water]: 6e-8 kg; lognormal variance with pedigree 1.762, pedigree (1,1,5,5,1)
  (same comment as for Ammonia)
- BOD5, Biological Oxygen Demand [water, ground-, long-term]: 0.0194 kg; lognormal variance with pedigree 0.632, pedigree (1,1,5,5,1)
  (same comment as for Ammonium)
- BOD5, Biological Oxygen Demand [water, surface water]: 0.000812 kg; lognormal variance with pedigree 0.442, pedigree (1,1,5,5,1)
  (same comment as for Ammonia)
- Barium II [water, ground-, long-term]: 5.37e-5 kg; lognormal variance with pedigree 0.762, pedigree (1,1,5,5,1)
  (same comment as for Ammonium)
- Barium II [water, surface water]: 1.28e-6 kg; lognormal variance with pedigree 1.132, pedigree (1,1,5,5,1)
  (same comment as for Ammonia)
- Beryllium II [water, ground-, long-term]: 1.12e-6 kg; lognormal variance with pedigree 1.582, pedigree (1,1,5,5,1)
  (same comment as for Ammonium)
- Beryllium II [water, surface water]: 1.08e-8 kg; lognormal variance with pedigree 1.882, pedigree (1,1,5,5,1)
  (same comment as for Ammonia)
- COD, Chemical Oxygen Demand [water, ground-, long-term]: 0.0821 kg; lognormal variance with pedigree 0.632, pedigree (1,1,5,5,1)
  (same comment as for Ammonium)
- COD, Chemical Oxygen Demand [water, surface water]: 0.00258 kg; lognormal variance with pedigree 0.432, pedigree (1,1,5,5,1)
  (same comment as for Ammonia)
- Cadmium II [water, ground-, long-term]: 8.8e-7 kg; lognormal variance with pedigree 1.632, pedigree (1,1,5,5,1)
  (same comment as for Ammonium)
- Cadmium II [water, surface water]: 2.7e-8 kg; lognormal variance with pedigree 1.792, pedigree (1,1,5,5,1)
  (same comment as for Ammonia)
- Chloride [water, ground-, long-term]: 0.00123 kg; lognormal variance with pedigree 0.472, pedigree (1,1,5,5,1)
  (same comment as for Ammonium)
- Chloride [water, surface water]: 0.00586 kg; lognormal variance with pedigree 0.452, pedigree (1,1,5,5,1)
  Emissions from short-term leachate treatment. Uncertainty calculated depending on waste input and uncertainty of transfer coefficents in landfill and wastewater treatment.
- Chromium III [water, surface water]: 5.36e-11 kg; lognormal variance with pedigree 1.842, pedigree (1,1,5,5,1)
  (same comment as for Ammonia)
- Chromium VI [water, ground-, long-term]: 4.35e-8 kg; lognormal variance with pedigree 8.602, pedigree (1,1,5,5,1)
  (same comment as for Ammonium)
- Chromium VI [water, surface water]: 1.79e-8 kg; lognormal variance with pedigree 1.812, pedigree (1,1,5,5,1)
  (same comment as for Ammonia)
- Cobalt II [water, ground-, long-term]: 8.64e-7 kg; lognormal variance with pedigree 1.542, pedigree (1,1,5,5,1)
  (same comment as for Ammonium)
- Cobalt II [water, surface water]: 4.86e-8 kg; lognormal variance with pedigree 1.732, pedigree (1,1,5,5,1)
  (same comment as for Ammonia)
- Copper ion [water, ground-, long-term]: 3.51e-5 kg; lognormal variance with pedigree 1.142, pedigree (1,1,5,5,1)
  (same comment as for Ammonium)
- Copper ion [water, surface water]: 1.45e-8 kg; lognormal variance with pedigree 1.732, pedigree (1,1,5,5,1)
  (same comment as for Ammonia)
- DOC, Dissolved Organic Carbon [water, ground-, long-term]: 0.075 kg; lognormal variance with pedigree 0.632, pedigree (1,1,5,5,1)
  (same comment as for Ammonium)
- DOC, Dissolved Organic Carbon [water, surface water]: 0.000627 kg; lognormal variance with pedigree 0.442, pedigree (1,1,5,5,1)
  (same comment as for Ammonia)
- Hydrogen sulfide [water, ground-, long-term]: 0.000111 kg; lognormal variance with pedigree 0.622, pedigree (1,1,5,5,1)
  (same comment as for Ammonium)
- Lead II [water, ground-, long-term]: 2.89e-5 kg; lognormal variance with pedigree 1.172, pedigree (1,1,5,5,1)
  (same comment as for Ammonium)
- Lead II [water, surface water]: 6.09e-9 kg; lognormal variance with pedigree 1.742, pedigree (1,1,5,5,1)
  (same comment as for Ammonia)
- Manganese II [water, ground-, long-term]: 7.35e-5 kg; lognormal variance with pedigree 0.792, pedigree (1,1,5,5,1)
  (same comment as for Ammonium)
- Manganese II [water, surface water]: 1.8e-5 kg; lognormal variance with pedigree 1.042, pedigree (1,1,5,5,1)
  (same comment as for Ammonia)
- Mercury II [water, ground-, long-term]: 2.92e-7 kg; lognormal variance with pedigree 1.762, pedigree (1,1,5,5,1)
  (same comment as for Ammonium)
- Mercury II [water, surface water]: 2.12e-9 kg; lognormal variance with pedigree 2.042, pedigree (1,1,5,5,1)
  (same comment as for Ammonia)
- Nickel II [water, ground-, long-term]: 1.05e-5 kg; lognormal variance with pedigree 1.292, pedigree (1,1,5,5,1)
  (same comment as for Ammonium)
- Nickel II [water, surface water]: 1.22e-7 kg; lognormal variance with pedigree 1.592, pedigree (1,1,5,5,1)
  (same comment as for Ammonia)
- Nitrate [water, ground-, long-term]: 2.31e-5 kg; lognormal variance with pedigree 0.542, pedigree (1,1,5,5,1)
  (same comment as for Ammonium)
- Nitrate [water, surface water]: 0.0037 kg; lognormal variance with pedigree 0.362, pedigree (1,1,5,5,1)
  (same comment as for Ammonia)
- Nitrite [water, ground-, long-term]: 1.09e-5 kg; lognormal variance with pedigree 0.622, pedigree (1,1,5,5,1)
  (same comment as for Ammonium)
- Nitrite [water, surface water]: 2.13e-5 kg; lognormal variance with pedigree 0.582, pedigree (1,1,5,5,1)
  (same comment as for Ammonia)
- Nitrogen [water, surface water]: 2.75e-5 kg; lognormal variance with pedigree 0.372, pedigree (1,1,5,5,1)
  (same comment as for Ammonia)
- Nitrogen, organic bound [water, ground-, long-term]: 0.000327 kg; lognormal variance with pedigree 0.622, pedigree (1,1,5,5,1)
  (same comment as for Ammonium)
- Selenium IV [water, ground-, long-term]: 8.81e-7 kg; lognormal variance with pedigree 1.822, pedigree (1,1,5,5,1)
  (same comment as for Ammonium)
- Selenium IV [water, surface water]: 7.1e-8 kg; lognormal variance with pedigree 1.692, pedigree (1,1,5,5,1)
  (same comment as for Ammonia)
- Strontium [water, ground-, long-term]: 4.46e-5 kg; lognormal variance with pedigree 1.092, pedigree (1,1,5,5,1)
  (same comment as for Ammonium)
- Strontium [water, surface water]: 4.31e-7 kg; lognormal variance with pedigree 1.402, pedigree (1,1,5,5,1)
  (same comment as for Ammonia)
- Sulfate [water, ground-, long-term]: 0.00426 kg; lognormal variance with pedigree 0.622, pedigree (1,1,5,5,1)
  (same comment as for Ammonium)
- Sulfate [water, surface water]: 0.000656 kg; lognormal variance with pedigree 0.732, pedigree (1,1,5,5,1)
  (same comment as for Chloride)
- TOC, Total Organic Carbon [water, ground-, long-term]: 0.075 kg; lognormal variance with pedigree 0.632, pedigree (1,1,5,5,1)
  (same comment as for Ammonium)
- TOC, Total Organic Carbon [water, surface water]: 0.000653 kg; lognormal variance with pedigree 0.432, pedigree (1,1,5,5,1)
  (same comment as for Ammonia)
- Tin ion [water, ground-, long-term]: 6.74e-6 kg; lognormal variance with pedigree 1.362, pedigree (1,1,5,5,1)
  (same comment as for Ammonium)
- Tin ion [water, surface water]: 5.4e-9 kg; lognormal variance with pedigree 1.932, pedigree (1,1,5,5,1)
  (same comment as for Ammonia)
- Zinc II [water, ground-, long-term]: 5.15e-5 kg; lognormal variance with pedigree 1.072, pedigree (1,1,5,5,1)
  (same comment as for Ammonium)
- Zinc II [water, surface water]: 3.01e-7 kg; lognormal variance with pedigree 1.382, pedigree (1,1,5,5,1)
  (same comment as for Ammonia)

## Sampling procedure
Landfill model based on observed leachate concentrations in literature. Extrapolated to 60'000 years heeding chemical characteristics. Initial waste composition from various literature sources.

## Extrapolations
This dataset has been copied from an original dataset covering the geography CH. The uncertainty has been adjusted accordingly.

## Review by Niels Jungbluth 2003-07-21
Passed. Calculation for standard deviation 95 of, i.e., infrastructure,
land occupation, transport services or other services can differ from
standard Pedigree approach used in this project and figures obtained by
this procedure.
