# rape meal to generic market for protein feed

Dataset: EcoSpold 2, unit process
Geography: GLO
Time period: 2012-01-01 to 2022-12-31
Technology level: current
Classification: ISIC rev.4 ecoinvent: 1080:Manufacture of prepared animal feeds
Scenario: Business-as-Usual
System model: Substitution, consequential, long-term
Generated by: Tereza Levova
Database: ecoinvent
isCopyrightProtected: true

## General comment
This activity is a linking activity, i.e. it connects rape meal with generic protein feed market. Rape meal is used mainly as a feed for animals, thus traded on generic feed market with other protein - containing products.

## Included activities end
Rape meal is a by-product from rape oil production. This linking activity has the rape meal as input (negative reference product) and produces protein and energy feed as outputs.

## Parameters
- fraction_to_generic_market: 0.9 % (obsolete); lognormal variance with pedigree 0.108, pedigree (4,1,1,1,1)
  It is assumed that 90% of rape meal is traded on generic protein feed market, i.e. its buyers do not care what type of protein feed they are buying. Remaining 10% of the production volume (PV) is assumed to be used for uses, where specific type of protein feed is required and cannot be substituted by any other protein feed.

## Reference product
- rape meal: 1 kg; name rape_meal_IN; By-product classification allocatable product; CPC 23319: Preparations used in animal feeding n.e.c.; lognormal variance with pedigree 0.21, pedigree (5,5,5,5,5)
  production volume 1 kg
  property gross energy, feed per kg of dry mass 19.31 MJ/kg; name rape_meal_RP_gross_E_feed_per_kg_DM
    Literature value from Agroscope database (http://www.feed-alp.admin.ch). Agroscope (http://www.agroscope.admin.ch/org/index.html?lang=en) is a research institute which belongs to the Swiss Federal Office for Agriculture. The gross energy in rape meal might vary depending on the amount of fat present in the meal. This meal is considered to have between 1.3% - 2.5% of fat.
  property price 0.127 EUR2005; name rape_meal_IN_price_EUR2005
    Temporary price data. Calculated as 90% of purchasers price based on: 2004 prices are calculated from World Import/Export data (tonnes and US$) from FaoStat statistics (http://faostat.fao.org/site/535/default.aspx#ancor, TRADE)- Commodity: 'Cake of rape seed'. [Accessed 24 May 2010].
  property protein feed, 100% crude per kg of dry mass 0.3886 kg/kg; name rape_meal_RP_protein_feed_per_kg_DM
    Literature value from Agroscope database (http://www.feed-alp.admin.ch). Agroscope (http://www.agroscope.admin.ch/org/index.html?lang=en) is a research institute which belongs to the Swiss Federal Office for Agriculture. The amount of protein feed in rape meal might vary depending on the amount of fat present in the meal. This meal is considered to have between 1.3% - 2.5% of fat.
  properties: carbon allocation 0.41151 kg, carbon content 0.457233, carbon content, fossil 0, carbon content, non-fossil 0.457233, dry mass 0.9 kg, water content 0.111111, water in wet mass 0.1 kg, wet mass 1 kg

## Inputs from technosphere
- energy feed, gross: 0.797121, 16.5819 MJ (2 suppliers, which the file names only by identifier); sum of these 17.379 MJ; = rape_meal_RP_gross_E_feed_per_kg_DM*0.9; lognormal variance with pedigree 0.0093, pedigree (4,3,1,3,1)
  Calculated based on literature value from Agroscope database (http://www.feed-alp.admin.ch). Agroscope (http://www.agroscope.admin.ch/org/index.html?lang=en) is a research institute which belongs to the Swiss Federal Office for Agriculture. The gross energy in rape meal might vary depending on the amount of fat present in the meal. This meal is considered to have between 1.3% - 2.5% of fat.
  production volume
    Calculated from production volume of reference product using the relative outputs.
  properties: dry mass 1 kg, price 0.0108 EUR2005, wet mass 1 kg
- protein feed, 100% crude: 0.34974 kg; name RP; = rape_meal_RP_protein_feed_per_kg_DM*0.9
  Calculated based on literature value from Agroscope database (http://www.feed-alp.admin.ch). Agroscope (http://www.agroscope.admin.ch/org/index.html?lang=en) is a research institute which belongs to the Swiss Federal Office for Agriculture. The amount of protein feed in rape meal might vary depending on the amount of fat present in the meal. This meal is considered to have between 1.3% - 2.5% of fat.
  production volume
    1.68E+10 kg of rape oil, crude was produced in 2005 according to FAO. Based on "rape oil mill operation" activity when 1 kg of rape oil, crude is produce 1.6182 kg of rape meal is produced. It is assumed that 90% of cotton seed meal is traded on generic protein feed market, i.e. its buyers do not care what type of protein feed they are buying. Remaining 10% of the production volume (PV) is assumed to be used for uses, where specific type of protein feed is required and cannot be substituted by any other protein feed.It is assumed that 90% of rape meal is traded on generic protein feed market, i.e. its buyers do not care what type of protein feed they are buying. Remaining 10% of the production volume (PV) is assumed to be used for uses, where specific type of protein feed is required and cannot be substituted by any other protein feed.
  properties: carbon content, non-fossil 0.53, dry mass 1 kg, price 0.424 EUR2005, wet mass 1 kg

## Review by Bo Weidema 2012-03-14
Production volumes are for 2005, even though the dataset is indicated to be valid for 2012.

## Review by Emilia Moreno Ruiz 2015-10-23
rape meal set to have a constrained market
