# heat and power co-generation, natural gas, 160kW electrical, lambda=1

Dataset: EcoSpold 2, unit process
Geography: CH
Time period: 2000-01-01 to 2022-12-31
Technology level: current
Classification: ISIC rev.4 ecoinvent: 3530:Steam and air conditioning supply
Classification: EcoSpold01Categories: natural gas/cogeneration
Tags: ConvertedDataset; with true value
Scenario: Business-as-Usual
System model: Substitution, consequential, long-term
Generated by: [System]
Published in: Heck, T. 2007
Database: ecoinvent
isCopyrightProtected: true

## General comment
The multioutput-process 'natural gas, burned in cogen 160kWe lambda=1, allocation exergy' delivers the coproducts 'heat, at cogen 160kWe lambda=1, allocation exergy' and 'electricity, at cogen 160kWe lambda=1, allocation exergy'. The exergy allocation is the allocation scheme suggested to be used within ecoinvent (e.g. in electricity mixes).
[This dataset was already contained in the ecoinvent database version 2. It was not individually updated during the transfer to ecoinvent version 3. Life Cycle Impact Assessment results may still have changed, as they are affected by changes in the supply chain, i.e. in other datasets. This dataset was generated following the ecoinvent quality guidelines for version 2. It may have been subject to central changes described in the ecoinvent version 3 change report (http://www.ecoinvent.org/database/ecoinvent-version-3/reports-of-changes/), and the results of the central updates were reviewed extensively. The changes added e.g. consistent water flows and other information throughout the database. The documentation of this dataset can be found in the ecoinvent reports of version 2, which are still available via the ecoinvent website. The change report linked above covers all central changes that were made during the conversion process.]

## Included activities end
The module includes fuel input, infrastructure, emissions to air, and substances needed for operation.

## Geography
Could be used for central European conditions.

## Technology
Average technology available on market.

## Parameters
- scaling factor: 1.81818 dimensionless

## Reference product
- heat, central or small-scale, natural gas: 1 MJ; = 0.55 * scaling_factor; By-product classification allocatable product; CPC 17300: Steam and hot water
  Amount was scaled to 1.
  EcoSpold01Location=CH
  production volume 1.51e8 MJ
    Literature value/extrapolation.
    According to OECD (2013), the total amount of heat produced in CHP plants in Switzerland amounts to 452 TJ in 2009. No specification is made on whether this heat is central/small-scale or district/industrial.
    The annual production volumes determine the shares of supplying activities to a certain market. The market for heat, central or small-scale, natural gas, is assumed to be supplied by 12.2% CHP plants and 87.8% heat plants.
    In order to model these shares, the 452 TJ from CHP plants were distributed to all three datasets supplying heat from CHP plants on the market for heat, central or small-scale, natural gas.
    OECD (2013), "OECD - Electricity and heat generation", IEA Electricity Information Statistics (OECD iLibrary database).doi: 10.1787/data-00457-en(Accessed on 15 Julyl 2013)
  property Corresponding fuel use 1.6565 MJ; name fuel_use; = 35.532*0.0256410256410256/0.55
    Lower heating value of the fuel input related to the heat/electricity output
  property exergy 0.169678 MJ; name exergy
    allocation factor for electricity (=1) vs. heat, where heat is calculated as the termodynamic mean temperature Tm = (Tfeed-Treturn)/ln(Tfeed/Treturn), relative to the application temperature (Tu, typically = 293 K), i.e. (Tm-Tu)/Tm
  property price 0.01 EUR2005
    Temporary price data. Calculated as 90% of purchasers price based on: Average European district heat price from Ecoheatcool and Euroheat 2005-2006, Ecoheat Work package 1: The European heat market. Final report. http://www.solarthermalworld.org/files/Ecoheatcool%20WP1%20Web.pdf?download
  property true value relation 0.169678; name true_value_relation
    property to calculate "true value" from
  properties: EcoSpold01Allocation_undefined_1 23, EcoSpold01Allocation_undefined_10 23, EcoSpold01Allocation_undefined_11 23, EcoSpold01Allocation_undefined_12 23, EcoSpold01Allocation_undefined_13 23, EcoSpold01Allocation_undefined_14 23, EcoSpold01Allocation_undefined_15 23, EcoSpold01Allocation_undefined_16 23, EcoSpold01Allocation_undefined_18 100, EcoSpold01Allocation_undefined_2 23, EcoSpold01Allocation_undefined_3 0, EcoSpold01Allocation_undefined_4 100, EcoSpold01Allocation_undefined_5 23, EcoSpold01Allocation_undefined_6 23, EcoSpold01Allocation_undefined_7 23, EcoSpold01Allocation_undefined_8 23, EcoSpold01Allocation_undefined_9 23, carbon allocation 0 kg, carbon content 0, heating value, net 1 MJ

## Inputs from technosphere
- electricity, low voltage: -0.161636 kWh; name electricity; = 0.0889 * scaling_factor
  EcoSpold01Location=CH
  Amount was scaled to the amount of reference product.
  production volume
    Calculated value
  property exergy 3.6 MJ; name electricity_exergy
  property true value relation 3.6; name electricity_true_value_relation
  properties: EcoSpold01Allocation_undefined_1 77, EcoSpold01Allocation_undefined_10 77, EcoSpold01Allocation_undefined_11 77, EcoSpold01Allocation_undefined_12 77, EcoSpold01Allocation_undefined_13 77, EcoSpold01Allocation_undefined_14 77, EcoSpold01Allocation_undefined_15 77, EcoSpold01Allocation_undefined_16 77, EcoSpold01Allocation_undefined_17 100, EcoSpold01Allocation_undefined_2 77, EcoSpold01Allocation_undefined_3 100, EcoSpold01Allocation_undefined_5 77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
  note on exergy: allocation factor for electricity (=1) vs. heat, where heat is calculated as the termodynamic mean temperature Tm = (Tfeed-Treturn)/ln(Tfeed/Treturn), relative to the application temperature (Tu, typically = 293 K), i.e. (Tm-Tu)/Tm
- heat and power co-generation unit, 160kW electrical, common components for heat+electricity: 9.09091e-9 unit; = 5E-09 * scaling_factor; lognormal variance with pedigree 0.04, pedigree (1,1,5,1,1)
  EcoSpold01Location=RER
  Amount was scaled to the amount of reference product.
- heat and power co-generation unit, 160kW electrical, components for electricity only: 9.09091e-9 unit; = 5E-09 * scaling_factor; lognormal variance with pedigree 0.04, pedigree (1,1,5,1,1)
  EcoSpold01Location=RER
  Amount was scaled to the amount of reference product.
- heat and power co-generation unit, 160kW electrical, components for heat only: 9.09091e-9 unit; = 5E-09 * scaling_factor; lognormal variance with pedigree 0.04, pedigree (1,1,5,1,1)
  EcoSpold01Location=RER
  Amount was scaled to the amount of reference product.
- lubricating oil: 5.45455e-5 kg; = 3E-05 * scaling_factor; lognormal variance with pedigree 0.05, pedigree (1,1,5,1,1)
  EcoSpold01Location=RER
  vender information
  Amount was scaled to the amount of reference product.
  properties: carbon content, fossil 0.75, dry mass 1 kg, heating value, net 40.2 MJ, wet mass 1 kg
  note on carbon content, fossil: Lubricating oil is produced from diesel. C-content/dry mass of fats and oils considered 75%, from: ecoinvent v2.2 report, n 15a, pg 40
  note on heating value, net: Literature value, Source: IPCC 2006, 2006 IPCC Guidelines for National Greenhouse Gas Inventories, Prepared by the National Greenhouse Gas Inventories Programme, Eggleston H.S., Buendia L., Miwa K., Ngara T. and Tanabe K. (eds). Published: IGES, Japan
- natural gas, low pressure: 0.04662 m3; = 0.0256410256410256 * scaling_factor; lognormal variance with pedigree 0.04, pedigree (1,1,5,1,1)
  EcoSpold01Location=CH
  Amount was scaled to the amount of reference product.
  properties: carbon content, fossil 0.695187, dry mass 1 kg, heating value, gross 39 MJ, heating value, net 36 MJ, wet mass 1 kg
  note on carbon content, fossil: C content considered the same as in high pressure (consumption mix)
  note on heating value, net: Literature value, Source: Christoph Meili;Niels Jungbluth;Maresa Bussa (2021) Life cycle inventories of crude oil and natural gas extraction. ESU-services Ltd. commissioned by BAFU & VSG, Schaffhausen, Switzerland, http://esu-services.ch/data/public-lci-reports/
- waste mineral oil: -5.45455e-5 kg; name waste_min_oil; = 3E-05 * scaling_factor; lognormal variance with pedigree 0.12, pedigree (1,1,1,1,1)
  EcoSpold01Location=CH
  rough estimate
  Amount was scaled to the amount of reference product.
  production volume
    Calculated value
  properties: carbon content, fossil 0.864444, dry mass 0.9 kg, heating value, net 34.7 MJ, water content 0.111111, wet mass 1 kg
  note on carbon content, fossil: Tab A.6, ecoinvent v2.2 report 13_I. C content has been calculated after data in the tables, and then referred to 1 kg DM
  note on heating value, net: Value taken from the general comment of the treatment dataset.

## Emissions to nature
- Carbon dioxide, fossil [air, urban air close to ground]: 0.101818 kg; = 0.056 * scaling_factor; lognormal variance with pedigree 0.04, pedigree (1,1,5,1,1)
  composition of natural gas
  Amount was scaled to the amount of reference product.
- Carbon monoxide, fossil [air, urban air close to ground]: 8.72727e-5 kg; = 4.8E-05 * scaling_factor; lognormal variance with pedigree 0.16, pedigree (1,1,5,1,1)
  estimate based on different references
  Amount was scaled to the amount of reference product.
- Dinitrogen monoxide [air, urban air close to ground]: 4.54545e-6 kg; = 2.5E-06 * scaling_factor; lognormal variance with pedigree 0.34, pedigree (1,1,5,1,1)
  rough estimate
  Amount was scaled to the amount of reference product.
- Methane, fossil [air, urban air close to ground]: 4.18182e-5 kg; = 2.3E-05 * scaling_factor; lognormal variance with pedigree 0.34, pedigree (1,1,5,1,1)
  (same comment as for Carbon monoxide, fossil)
- NMVOC, non-methane volatile organic compounds [air, urban air close to ground]: 3.63636e-6 kg; = 2E-06 * scaling_factor; lognormal variance with pedigree 0.34, pedigree (1,1,5,1,1)
  (same comment as for Carbon monoxide, fossil)
- Nitrogen oxides [air, urban air close to ground]: 2.72727e-5 kg; = 1.5E-05 * scaling_factor; lognormal variance with pedigree 0.16, pedigree (1,1,5,1,1)
  (same comment as for Carbon monoxide, fossil)
- Particulate Matter, < 2.5 um [air, urban air close to ground]: 2.72727e-7 kg; = 1.5E-07 * scaling_factor; lognormal variance with pedigree 0.16, pedigree (1,1,5,1,1)
  (same comment as for Carbon monoxide, fossil)
- Platinum [air, urban air close to ground]: 1.27273e-11 kg; = 7E-12 * scaling_factor; lognormal variance with pedigree 1.37, pedigree (1,1,5,1,1)
  (Artelt et al. 2000)
  Amount was scaled to the amount of reference product.
- Sulfur dioxide [air, urban air close to ground]: 1e-6 kg; = 5.5E-07 * scaling_factor; lognormal variance with pedigree 0.04, pedigree (1,1,5,1,1)
  composition of natural gas
  Amount was scaled to the amount of reference product.

## Sampling procedure
Literature. Manufacturer information.

## Review by Gerald Rebitzer (obsolete) 2003-07-03
passed

## Review by Emilia Moreno Ruiz 2012-04-16
calculation of fuel use property.
