# oxidation of butane

Dataset: EcoSpold 2, unit process
Geography: RER
Time period: 1989-01-01 to 2022-12-31
Technology level: current
Classification: ISIC rev.4 ecoinvent: 2011:Manufacture of basic chemicals
Classification: EcoSpold01Categories: chemicals/organics
Tags: ConvertedDataset
Scenario: Business-as-Usual
System model: Substitution, consequential, long-term
Share of production covered: 100 %
Generated by: Jürgen Sutter
Published in: Sutter, J. 2007
Database: ecoinvent
isCopyrightProtected: true

## General comment
This data represents the multioutput-process "butane oxidation." This process delivers the co-products formic acid, methyl acetate, ethyl acetate, acetic acid, methyl ethyl ketone and acetone based off of 1 kg of butane. The raw materials, auxilliaries and energy consumption are modelled with data from literature sources. The emissions are estimated. Infrastructure is included with a default value.
[This dataset was already contained in the ecoinvent database version 2. It was not individually updated during the transfer to ecoinvent version 3. Life Cycle Impact Assessment results may still have changed, as they are affected by changes in the supply chain, i.e. in other datasets. This dataset was generated following the ecoinvent quality guidelines for version 2. It may have been subject to central changes described in the ecoinvent version 3 change report (http://www.ecoinvent.org/database/ecoinvent-version-3/reports-of-changes/), and the results of the central updates were reviewed extensively. The changes added e.g. consistent water flows and other information throughout the database. The documentation of this dataset can be found in the ecoinvent reports of version 2, which are still available via the ecoinvent website. The change report linked above covers all central changes that were made during the conversion process.]

## Included activities start
From the reception of butane at the factory gate.

## Included activities end
This activity ends with the production of formic acid, methyl acetate, ethyl acetate, acetic acid, methyl ethyl ketone and acetone via the oxidation of 1 kg of butane. This dataset includes the input materials, energy uses, infrastructure and emissions.

## Geography
The inventory is modelled for Europe.

## Technology
The liquid-phase oxidation of hydrocarbons is an important process to produce acetic acid, formic acid or methyl acetate. About 43 kg of formic acid is produced per ton of acetic acid. Unreacted hydrocarbons, volatile neutral constituents, and water are separated first from the oxidation product. Formic acid is separated in the next column; azeotropic distillation is generally used for this purpose. The formic acid contains about 2 wt % acetic acid, 5 wt % water, and 3 wt % benzene. Formic acid with a content of about 98 wt % can be produced by further distillation.
Reference:
Gräfje, H., Körnig, W., Weitz, H.-M., Reiß, W.: Butanediols, Butenediol, and Butynediol, Chapter 1. In: Ullmann's Encyclopedia of Industrial Chemistry, Sev-enth Edition, 2004 Electronic Release (ed. Fiedler E., Grossmann G., Kersebohm D., Weiss G. and Witte C.). 7 th Electronic Release Edition. WileyInterScience, New York, Online-Version under: http://www.mrw.interscience.wiley.com/ueic/articles/a04_455/frame.html

## Time period
Time of publications.

## Parameters
- fraction, cooling water, cooling pond system, to air: 0.032 dimensionless; name fraction_CW_CP_to_air; lognormal variance with pedigree 0.0413, pedigree (2,3,1,3,1)
  Calculated based on literature value (Scown, C.D., 2011, Water Footprint of U.S. Transportation Fuels and supplying information of the article) (Vionnet, S., Quantis Water Database - Technical Report, 2012).
- fraction, cooling water, once-through system, to air: 0.004 dimensionless; name fraction_CW_OT_to_air; lognormal variance with pedigree 0.0413, pedigree (2,3,1,3,1)
  (same comment as for fraction, cooling water, cooling pond system, to air)
- fraction, cooling water, recirculating system, to air: 0.771 dimensionless; name fraction_CW_R_to_air; lognormal variance with pedigree 0.0413, pedigree (2,3,1,3,1)
  (same comment as for fraction, cooling water, cooling pond system, to air)
- fraction, cooling water, to air: 0.3875 dimensionless; name fraction_CW_to_air; = (0.5*fraction_CW_OT_to_air)+(0.5*fraction_CW_R_to_air); lognormal variance with pedigree 0.092025, pedigree (4,4,3,2,4)
  Calculated value based on literature value (see comments of the other parametres present in this dataset) and expert opinion. In the case when no industry/literature data are available about the type of cooling or directly fraction, cooling water, to air specific for the process a default assumption is applied. It is assumed that the once-through cooling system is used in 50% of all cases and recirculating system is used in another 50% of all cases.
- fraction, process water, to air: 0.205 dimensionless; name fraction_PW_to_air; lognormal variance with pedigree 0.092025, pedigree (4,4,3,2,4)
  Literature value (Statistics Canada, 2007 & Shaffer, K.H., 2008, Consumptive water use in the Great Lakes Basin, USGS) (Vionnet, S., Quantis Water Database - Technical Report, 2012).
- fraction, water, deionised, to air: 0.205 dimensionless; name fraction_WDI_to_air; = fraction_PW_to_air; lognormal variance with pedigree 0.092025, pedigree (4,4,3,2,4)
  Calculated value. See comment in the other parametres present in this dataset. Deionised water is considered to be always used as process water, thus process water fractions to air are applied to all deionised water input flows to calculate the amount of water consumed in the processes.

## Reference product
- acetic acid, without water, in 98% solution state: 1 kg; name RP_amount_1; By-product classification allocatable product; CPC 34120: Industrial monocarboxylic fatty acids; acid oils from refining; CAS 64-19-7
  EcoSpold01Location=RER
  production volume 1.3e8 kg
    Na
    estimated 13% of total production (residual)
  property heating value, net 14.6 MJ
    Based on literature, page 10, Althaus H.-J., Chudacoff M., Hischier R., Jungbluth N., Osses M. and Primas A. (2007) Life Cycle Inventories of Chemicals. Final report ecoinvent data v2.0 No. 8. EMPA, Swiss Centre for Life Cycle Inventories, Dübendorf, CH, Online-Version under: www.ecoinvent.org.
  property price 0.479 EUR2005
    Calculated value based on data from United Nations Commodity Trade Statistics Database (comtrade.un.org). UN comtrade category: 291521 Acetic aicid. Prices from the year 2005. Using exchange rate of 1EURO = 1.209 USD. Average of price of import into 5 main markets (EU, US, JP, IN and CN).
  properties: EcoSpold01Allocation_undefined_10 57.94, EcoSpold01Allocation_undefined_11 57.94, EcoSpold01Allocation_undefined_12 57.94, EcoSpold01Allocation_undefined_13 57.94, EcoSpold01Allocation_undefined_14 57.94, EcoSpold01Allocation_undefined_15 57.94, EcoSpold01Allocation_undefined_16 57.94, EcoSpold01Allocation_undefined_17 57.94, EcoSpold01Allocation_undefined_18 57.94, EcoSpold01Allocation_undefined_19 57.94, EcoSpold01Allocation_undefined_2 57.94, EcoSpold01Allocation_undefined_20 57.94, EcoSpold01Allocation_undefined_21 57.94, EcoSpold01Allocation_undefined_22 100, EcoSpold01Allocation_undefined_27 57.9434, EcoSpold01Allocation_undefined_28 57.9434, EcoSpold01Allocation_undefined_3 57.94, EcoSpold01Allocation_undefined_4 57.94, EcoSpold01Allocation_undefined_5 57.94, EcoSpold01Allocation_undefined_6 57.94, EcoSpold01Allocation_undefined_7 57.94, EcoSpold01Allocation_undefined_8 57.94, EcoSpold01Allocation_undefined_9 57.94, carbon allocation 0.400016 kg, carbon content 0.400016, carbon content, fossil 0.400016, carbon content, non-fossil 0, dry mass 1 kg, water content 0, water in wet mass 0 kg, wet mass 1 kg

## Inputs from technosphere
- acetone, liquid: -0.0666667 kg; name BP_amount_1
  production volume
    Na
    Calculated relative to main output (acetic acid)
  properties: EcoSpold01Allocation_undefined_10 3.863, EcoSpold01Allocation_undefined_11 3.863, EcoSpold01Allocation_undefined_12 3.863, EcoSpold01Allocation_undefined_13 3.863, EcoSpold01Allocation_undefined_14 3.863, EcoSpold01Allocation_undefined_15 3.863, EcoSpold01Allocation_undefined_16 3.863, EcoSpold01Allocation_undefined_17 3.863, EcoSpold01Allocation_undefined_26 100, EcoSpold01Allocation_undefined_27 3.86315, EcoSpold01Allocation_undefined_28 3.86315, heating value, net 31.32 MJ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
- chemical factory, organics: 6.90323e-10 unit; lognormal variance with pedigree 0.448, pedigree (4,5,5,5,5)
  EcoSpold01Location=RER
  Estimation. This module assumes a built area of about 4.2 ha, an average output of 50'000 t/a, and plant life of fifty years.
  Uncertainty: Estimation
- electricity, medium voltage: 0.369992 kWh; source Chauvel, A. 1989; lognormal variance with pedigree 0.0707, pedigree (1,3,5,3,1)
  EcoSpold01Location=UCTE
  Literature value. Data from a French production plant. Values converted to a base of butane using yields of the diverse co-products.
  Uncertainty: Chauvel 1989
- ethyl acetate: -0.195699 kg
  EcoSpold01Location=RER
  production volume
    Na
    Calculated relative to main output (acetic acid)
  properties: EcoSpold01Allocation_undefined_10 11.34, EcoSpold01Allocation_undefined_11 11.34, EcoSpold01Allocation_undefined_12 11.34, EcoSpold01Allocation_undefined_13 11.34, EcoSpold01Allocation_undefined_14 11.34, EcoSpold01Allocation_undefined_15 11.34, EcoSpold01Allocation_undefined_16 11.34, EcoSpold01Allocation_undefined_17 11.34, EcoSpold01Allocation_undefined_24 100, EcoSpold01Allocation_undefined_27 11.3402, EcoSpold01Allocation_undefined_28 11.3402, heating value, net 31.32 MJ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
- formic acid: -0.0430108 kg
  EcoSpold01Location=RER
  production volume
    Na
    Calculated relative to main output (acetic acid)
  properties: EcoSpold01Allocation_undefined_1 100, EcoSpold01Allocation_undefined_10 2.492, EcoSpold01Allocation_undefined_11 2.492, EcoSpold01Allocation_undefined_12 2.492, EcoSpold01Allocation_undefined_13 2.492, EcoSpold01Allocation_undefined_14 2.492, EcoSpold01Allocation_undefined_15 2.492, EcoSpold01Allocation_undefined_16 2.492, EcoSpold01Allocation_undefined_17 2.492, EcoSpold01Allocation_undefined_27 2.49202, EcoSpold01Allocation_undefined_28 2.49202, heating value, net 13.17 MJ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
- heat, district or industrial, natural gas: 7.524 MJ; source Chauvel, A. 1989; lognormal variance with pedigree 0.0707, pedigree (1,3,5,3,1)
  Literature value. Data from a French production plant. Values converted to a base of butane using yields of the diverse co-products.
  Uncertainty: Chauvel 1989
  properties: heating value, net 1 MJ
- heat, district or industrial, other than natural gas: 4.19958 MJ; source Chauvel, A. 1989; lognormal variance with pedigree 0.0707, pedigree (1,3,5,3,1)
  (same comment as for heat, district or industrial, natural gas)
  properties: heating value, net 1 MJ
- liquefied petroleum gas: 1.06983, 0.00544093 kg (2 suppliers, which the file names only by identifier); sum of these 1.07527 kg; source Chauvel, A. 1989; lognormal variance with pedigree 0.0707, pedigree (1,3,5,3,1)
  Literature value. Data from a French production plant. Values converted to a base of butane using yields of the diverse co-products.
  EcoSpold01Location=CH
  Uncertainty: Chauvel 1989
  properties: carbon content, fossil 0.821863, dry mass 1 kg, heating value, net 45.5 MJ, wet mass 1 kg
  note on heating value, net: Indicative value. Reference: Fuels - Higher and Lower Calorific Values, available at: https://www.engineeringtoolbox.com/fuels-higher-calorific-values-d_169.html
- methyl acetate: -0.188172 kg
  EcoSpold01Location=RER
  production volume
    Na
    Calculated relative to main output (acetic acid)
  properties: EcoSpold01Allocation_undefined_10 10.9, EcoSpold01Allocation_undefined_11 10.9, EcoSpold01Allocation_undefined_12 10.9, EcoSpold01Allocation_undefined_13 10.9, EcoSpold01Allocation_undefined_14 10.9, EcoSpold01Allocation_undefined_15 10.9, EcoSpold01Allocation_undefined_16 10.9, EcoSpold01Allocation_undefined_17 10.9, EcoSpold01Allocation_undefined_25 100, EcoSpold01Allocation_undefined_27 10.9033, EcoSpold01Allocation_undefined_28 10.9033, heating value, net 24.55 MJ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
- methyl ethyl ketone: -0.232258 kg
  EcoSpold01Location=RER
  production volume
    Na
    Calculated relative to main output (acetic acid)
  properties: EcoSpold01Allocation_undefined_10 13.46, EcoSpold01Allocation_undefined_11 13.46, EcoSpold01Allocation_undefined_12 13.46, EcoSpold01Allocation_undefined_13 13.46, EcoSpold01Allocation_undefined_14 13.46, EcoSpold01Allocation_undefined_15 13.46, EcoSpold01Allocation_undefined_16 13.46, EcoSpold01Allocation_undefined_17 13.46, EcoSpold01Allocation_undefined_18 13.46, EcoSpold01Allocation_undefined_19 13.46, EcoSpold01Allocation_undefined_23 100, heating value, net 33.63 MJ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
- water, deionised: 0.0179342, 4.98207 kg (2 suppliers, which the file names only by identifier); sum of these 5 kg; source Chauvel, A. 1989; lognormal variance with pedigree 0.0707, pedigree (1,3,5,3,1)
  (same comment as for liquefied petroleum gas)
  properties: wet mass 1 kg

## Inputs from nature
- Water, cooling, unspecified natural origin [natural resource, in water]: 0.26 m3; name water_cooling_UNO_input; source Chauvel, A. 1989; lognormal variance with pedigree 0.0707, pedigree (1,3,5,3,1)
  Literature value. Data from a French production plant.
  Uncertainty: Chauvel 1989

## Emissions to nature
- Butane [air, urban air close to ground]: 0.00215054 kg; lognormal variance with pedigree 0.188, pedigree (4,5,5,5,5)
  Estimation. Air emissions occurring from the purge vent, the distillation vent and fugitive emission sources were estimated to 0.2% of the raw material input.
  It is assumed that the manufacturing plants are located in an urban/industrial area and consequently the emissions are categorised as emanating in a high population density area.
  Uncertainty: Estimation
- Carbon dioxide, fossil [air, urban air close to ground]: 0.0162581 kg; lognormal variance with pedigree 0.1786, pedigree (4,5,5,5,5)
  Estimation. Air emissions occurring from the purge vent, the distillation vent and fugitive emission sources were estimated to 0.2% of the raw material input.
  The carbon contained in the removed by products during waste water treatment was accounted as CO2 emissions to air.
  It is assumed that the manufacturing plants are located in an urban/industrial area and consequently the emissions are categorised as emanating in a high population density area.
  Uncertainty: Calculated from the water treatment
- Water [air, unspecified]: 0.101775 m3; name water_to_air_unspecified; = (water_deionised_input/1000*fraction_WDI_to_air)+(water_cooling_UNO_input*fraction_CW_to_air); lognormal variance with pedigree 0.0807, pedigree (2,2,5,1,1)
  Calculated value based on literature values and expert opinion. See comments in the parametres' comment field.
  property fraction, origin: fresh water 0.0100712; name fraction_origin_fresh_water
  property fraction, origin: salt water 0; name fraction_origin_salt_water
  property fraction, origin: unspecified 0.989929; name fraction_origin_unspecified
- Acetaldehyde [water, surface water]: 0.00172043 kg; lognormal variance with pedigree 0.188, pedigree (4,5,5,5,5)
  Calculation. Calculated with yields from literature source.
  It is assumed that the manufacturing plants are located in an urban/industrial area and consequently the emissions are categorised as emanating in a high population density area.
  Water emissions are assumed to be emitted into rivers.
  Uncertainty: Estimation
- BOD5, Biological Oxygen Demand [water, surface water]: 0.0162581 kg; lognormal variance with pedigree 0.188, pedigree (4,5,5,5,5)
  Calculation. This data was calculated from the amount of emissions in the treated waste water assuming a carbon conversion of 96% for COD and the worst case scenario: BOD=COD.
  It is assumed that the manufacturing plants are located in an urban/industrial area and consequently the emissions are categorized as emanating in a high population density area. The emissions into water are assumed to be emitted into rivers.
  Uncertainty: Calculated from the water emissions
- Butanol [water, surface water]: 0.00107527 kg; lognormal variance with pedigree 0.188, pedigree (4,5,5,5,5)
  (same comment as for Acetaldehyde)
- Butyl acetate [water, surface water]: 0.00139785 kg; lognormal variance with pedigree 0.188, pedigree (4,5,5,5,5)
  (same comment as for Acetaldehyde)
- COD, Chemical Oxygen Demand [water, surface water]: 0.0162581 kg; lognormal variance with pedigree 0.188, pedigree (4,5,5,5,5)
  (same comment as for BOD5, Biological Oxygen Demand)
- DOC, Dissolved Organic Carbon [water, surface water]: 0.00451613 kg; lognormal variance with pedigree 0.188, pedigree (4,5,5,5,5)
  Calculation. This data was calculated from the amount of emissions in the treated waste water assuming a carbon conversion of 96% for COD and the worst case scenario: TOC=DOC.
  It is assumed that the manufacturing plants are located in an urban/industrial area and consequently the emissions are categorized as emanating in a high population density area. The emissions into water are assumed to be emitted into rivers.
  Uncertainty: Calculated from the water emissions
- Ethanol [water, surface water]: 0.00247312 kg; lognormal variance with pedigree 0.188, pedigree (4,5,5,5,5)
  (same comment as for Acetaldehyde)
- Methanol [water, surface water]: 0.00172043 kg; lognormal variance with pedigree 0.448, pedigree (4,5,5,5,5)
  (same comment as for Acetaldehyde)
- TOC, Total Organic Carbon [water, surface water]: 0.00451613 kg; lognormal variance with pedigree 0.188, pedigree (4,5,5,5,5)
  (same comment as for DOC, Dissolved Organic Carbon)
- Water [water, unspecified]: 0.163225 m3; name water_to_water_unspecified; = (water_deionised_input/1000)*(1-fraction_WDI_to_air)+water_cooling_UNO_input*(1-fraction_CW_to_air); lognormal variance with pedigree 0.0807, pedigree (2,2,5,1,1)
  (same comment as for Water)
  property carbon content, fossil 0; name C_content_fossil
  property carbon content, non-fossil 0; name C_content_non_fossil
  property fraction, origin: fresh water 0.0243529; name fraction_origin_fresh_water_Ww
  property fraction, origin: salt water 0; name fraction_origin_salt_water_Ww
  property fraction, origin: unspecified 0.975647; name fraction_origin_unspecified_Ww
  property water in wet mass 1000 kg; name WWM

## Sampling procedure
Literature data

## Review by Roland Hischier 2007-09-01
passed.

## Review by Roland Hischier 2011-11-24
Transfer of documentation done.

## Review by Emilia Moreno Ruiz 2012-03-08
submitted to correct name change from "acetone", to "acetone, liquid"
