# treatment of sewage sludge, 75% water, WWT, WW from wafer fabrication, sanitary landfill

Dataset: EcoSpold 2, unit process
Geography: GLO
Time period: 1994-01-01 to 2022-12-31
Technology level: current
Classification: ISIC rev.4 ecoinvent: 3821:Treatment and disposal of non-hazardous waste
Scenario: Business-as-Usual
System model: Substitution, consequential, long-term
Generated by: Nikolia Stoikou
Database: ecoinvent
isCopyrightProtected: true

## General comment
The process represents the treatment of a waste (sewage sludge) that is exclusively generated from another waste treatment. Sewage sludge is generated in the wastewater treatment of 'wastewater from wafer fabrication'. Recommended use of this dataset: to be used within the specific chain of treatments for 'wastewater from wafer fabrication'. Share of biogenic carbon in the sludge: 0%. Landfill gas capture and utilisation generates 0.03321 kWh of electricity and 0.0599 MJ of useful heat. 0.002598 kg waste mass remains in the landfill even after the long term period.

## Included activities start
The activity starts with the waste being available at the gate of the treatment facility. Collection and transportation of the waste to the treatment plant is not included.

## Included activities end
The activity ends with the waste being treated and waste-specific emissions from the landfill are released to the environment (air due to landfil gas and water due to landfil leachate).

## Geography
Landfill site with mean annual temperature (MAT) of 16.743579766537 degC, mean annual precipitation (MAP) of 1250.84108527132 mm/year, and net infiltration of 790.252035689178 mm/year.The leachate percolating through the landfill has an average residence time of 6.33 years.
References: UN data, 2020. Precipitation, Environment Statistics Database, United Nations Statistics Division Available at: http://data.un.org/Data.aspx?q=precipitation&d=ENV&f=variableID%3a6;
World Bank, 2022. Surface area (sq.km), World Bank Group Available at: https://data.worldbank.org/indicator/AG.SRF.TOTL.K2;
Doka G.,2021. A model for composition-specific life cycle inventories of regionalised wastewater fates, Zurich, Switzerland. http://www.doka.ch/publications.htm

## Technology
Sanitary (controlled) landfill for municipal solid waste. Ultimate average landfill height is 20 meters. Operation phase duration is 30 years. The total raw landfill gas mass produced in the landfill from this waste is 0.09651 kg. The total CH4 mass in the raw landfill gas is 0.02005 kg. Percentage of landfill gas directly emitted is 47w%. Percentage of landfill gas captured and flared is 18.02w%. Percentage of landfill gas captured and utilised is 34.98%. Conversion efficiencies are 27.8e% for electricity and 13.5e% for useful heat. Leachate generated during the first 100 years is collected and treated region-specifically before emission. Based on average waste composition and climate data the end of carbonate phase is estimated to be reached 2'863 years after waste deposition.

## Reference product
- sewage sludge, 75% water, WWT, WW from wafer fabrication: -1 kg; By-product classification Waste; CPC 39920: Sewage sludge
  production volume 1.10617e7 kg
    In global scale, 25.25% of the sewage sludge is disposed through municipal incineration, 16.15% in sanitary landfill, and 58.6% in landfarming. Therefore, the PV for this reference product is calculated based on the production of sewage sludge of the wastewater treatment process (Doka G.,2021. A model for composition-specific life cycle inventories of regionalised wastewater fates, Zurich, Switzerland. http://www.doka.ch/publications.htm)
  properties: arsenic content 0.00427835, cadmium content 0.00619907, carbon allocation 0.0344205 kg, carbon content 0.137682, carbon content, fossil 0.137682, carbon content, non-fossil 0, chromium content 0.00610012, copper content 0.0555966, dry mass 0.25 kg, heating value, gross 2.3055 MJ, hydrogen content 0.018733, iron content 0.0580924, lead content 0.00616698, magnesium content 0.000500125, nickel content 0.0311599, nitrogen content 0.0370249, oxygen content 0.50223, phosphorus content 0.103441, price 0 EUR2005, silicon content 0.0327951, water content 3, water in wet mass 0.75 kg, wet mass 1 kg

## Inputs from technosphere
- cast iron: 1.47498e-6 kg
  For sewer auxiliary materials.
  properties: carbon content, fossil 0.04, dry mass 1 kg, wet mass 1 kg
- concrete, 30MPa: 6.31418e-10, 1.24102e-7, 1.22214e-8, 2.9327e-9, 3.01186e-9 m3 (5 suppliers, which the file names only by identifier); sum of these 1.429e-7 m3
  For leachate collection tanks and sewer pipe.
  properties: carbon content, fossil 1e-51, dry mass 2316 kg, water content 0.054836, wet mass 2443 kg
- diesel, burned in building machine: 0.0483865 MJ
  For waste distribution and compaction, construction diesel for base and compartment seals, for access street and sewer construction.
  properties: heating value, net 1 MJ
- electricity, low voltage: 1.5e-5 kWh
  Administrative building electricity consumption.
- electricity, medium voltage: -0.0156651 kWh; lognormal variance with pedigree 0.5224, pedigree (5,5,5,5,5)
  Net production of electricity from landfill gas utilisation (minus electricity demand for landfill gas pumping).
  Uncertainty: Uncertainty calculated depending on waste input and uncertainty of transfer coefficients in landfill to landfill gas, uncertainty in gas capture and utilisation.
  production volume
    Calculated from the production volume of the reference product in proportion to the respective output amounts.
  properties: carbon content, fossil 0.142876, dry mass 50.7 kg, price 0.1 EUR2005, wet mass 50.7 kg
- excavation, hydraulic digger: 0.000387746 m3
  Excavation work for landfill construction, sewer construction and recultivation.
- excavation, skid-steer loader: 0.000387746 m3
  Excavation work for landfill construction, sewer construction and recultivation.
- extrusion, plastic pipes: 8.49391e-5 kg
  For base and interior drain system of landfill, sewer auxiliary materials.
- gravel, round: 4.1637e-5, 0.160101 kg (2 suppliers, which the file names only by identifier); sum of these 0.160142 kg
  For base and flank gravel beds and concrete, for access street, for drainage beds, for recultivation layer.
  properties: dry mass 1 kg, wet mass 1 kg
- heat, district or industrial, other than natural gas: -0.026642 MJ
  Net production of heat from landfill gas utilisation.
  production volume
    (same comment as for electricity, medium voltage)
  property corresponding fuel use, propane, furnace >100kW 0 MJ; name fuel_use
  properties: dry mass 1.06044 kg, heating value, net 1 MJ, price 0.0112407 EUR2005, wet mass 1.06044 kg
  note on corresponding fuel use, propane, furnace >100kW: Lower heating value of the fuel input related to the heat/electricity output, taken directly from ecoinvent v3.0 dataset "heat production, natural gas, at industrial furnace >100kW, GLO 2000".
- pitch: 0.000109754, 1.26899e-5, 6.25509e-6, 9.26113e-6, 0.00160035, 2.39036e-6, 0.000283104, 0.0003637 kg (8 suppliers, which the file names only by identifier); sum of these 0.0023875 kg
  For base and compartment seals and access street construction.
  properties: carbon content, fossil 0.83, dry mass 1 kg, heating value, net 28 MJ, wet mass 1 kg
- polyethylene, high density, granulate: 0.000268492 kg
  For base and compartment seals, for base and interior drain system of landfill, sewer auxiliary materials.
  properties: carbon content, fossil 0.857143, dry mass 1 kg, heating value, net 42.47 MJ, wet mass 1 kg
- polypropylene, granulate: 2.23482e-7 kg
  For sewer auxiliary materials.
  properties: carbon content, fossil 0.857143, dry mass 1 kg, heating value, net 32.78 MJ, wet mass 1 kg
  note on heating value, net: Value extracted from "treatment of waste polypropylene, open burning"
- polyvinylchloride, bulk polymerised: 2.23482e-7 kg
  For sewer auxiliary materials.
  properties: carbon content, fossil 0.387097, dry mass 1 kg, heating value, net 21.5 MJ, wet mass 1 kg
- reinforcing steel: 8.71581e-6 kg
  For sewer auxiliary materials.
  properties: carbon content, fossil 0.004, dry mass 1 kg, wet mass 1 kg
- sand: 1.21143e-8, 5.25272e-9, 1.01179e-6, 6.58368e-5 kg (4 suppliers, which the file names only by identifier); sum of these 6.68659e-5 kg
  For sewer auxiliary materials.
  properties: dry mass 1 kg, wet mass 1 kg
- steel, chromium steel 18/8, hot rolled: 3.03936e-6 kg
  For sewer auxiliary materials.
  properties: carbon content, fossil 0.0008, dry mass 1 kg, wet mass 1 kg
- synthetic rubber: 8.93929e-8 kg
  For sewer auxiliary materials.
  properties: carbon content, fossil 0.871949, dry mass 1 kg, heating value, net 26.42 MJ, wet mass 1 kg
- tap water: 0.00185772 kg
  For sewer auxiliary materials.
  properties: carbon content, fossil 0.00178991, dry mass 0.000337476 kg, water content 2962.17, wet mass 1 kg

## Inputs from nature
- Organic carbon, placed in landfill [inventory indicator, waste]: 0.0344206 kg
  Mass of organic carbon in waste (without inorganic carbon), initially (year 1) put in sanitary landfill. The exchange represents a flow that is within the technosphere. This exchange should only be used to apply ecofactors for the Swiss LCIA method of Ecological Scarcity and not any other purpose.
- Waste mass, total, placed in landfill [inventory indicator, waste]: 1 kg
  Mass of waste initially (year 1) put in sanitary landfill. The exchange represents a flow that is within the technosphere. This exchange should only be used to apply ecofactors for the Swiss LCIA method of Ecological Scarcity and not any other purpose.
- Occupation, construction site [natural resource, land]: 0.00025 m2*year
  For construction phase of the landfill.
- Occupation, dump site [natural resource, land]: 0.0015 m2*year
  For landfill operation phase.
- Occupation, shrub land, sclerophyllous [natural resource, land]: 0.00025 m2*year
  Restoration and aftercare phase.
- Occupation, traffic area, road network [natural resource, land]: 0.00185 m2*year
  For access road.
- Transformation, from dump site, sanitary landfill [natural resource, land]: 5e-5 m2
  Conversion after landfill operation.
- Transformation, from pasture, man made [natural resource, land]: 6e-5 m2
  Original conversion of landfill area and access road.
- Transformation, from shrub land, sclerophyllous [natural resource, land]: 5e-5 m2
  After restoration.
- Transformation, to dump site, sanitary landfill [natural resource, land]: 5e-5 m2
  Conversion to landfill area.
- Transformation, to forest, unspecified [natural resource, land]: 5e-5 m2
  Conversion to forest after renaturation.
- Transformation, to shrub land, sclerophyllous [natural resource, land]: 5e-5 m2
  Initial restoration and renaturation.
- Transformation, to traffic area, road network [natural resource, land]: 1e-5 m2
  Construction of access road.

## Emissions to nature
- Arsenic ion [air, non-urban air or from high stacks]: 1.61576e-6 kg
  Emission from direct release or combustion of landfill biogas.
- Cadmium II [air, non-urban air or from high stacks]: 1.09069e-6 kg
  Emission from direct release or combustion of landfill biogas.
- Carbon dioxide, fossil [air, non-urban air or from high stacks]: 0.0541714 kg
  Emission from direct release or combustion of landfill biogas.
- Carbon monoxide, fossil [air, non-urban air or from high stacks]: 3.30506e-6 kg
  Emission from direct release or combustion of landfill biogas.
- Chromium III [air, non-urban air or from high stacks]: 2.60725e-9 kg
  Emission from direct release or combustion of landfill biogas.
- Copper ion [air, non-urban air or from high stacks]: 1.16668e-8 kg
  Emission from direct release or combustion of landfill biogas.
- Heat, waste [air, non-urban air or from high stacks]: 0.317085 MJ
  Emission from direct release or incineration of landfill biogas.
- Iron ion [air, non-urban air or from high stacks]: 2.99195e-8 kg; lognormal variance with pedigree 2.4865, pedigree (1,1,4,1,1)
  Emission from direct release or combustion of landfill biogas.
  Uncertainty: Uncertainty calculated from uncertainty of the waste composition of this waste, uncertainty in waste decomposition and short-term leaching in landfill-
- Lead II [air, non-urban air or from high stacks]: 1.81668e-9 kg
  Emission from direct release or combustion of landfill biogas.
- Magnesium [air, non-urban air or from high stacks]: 1.15721e-8 kg
  Emission from direct release or combustion of landfill biogas.
- Methane, fossil [air, non-urban air or from high stacks]: 0.00702998 kg
  Emission from direct release or combustion of landfill biogas.
- NMVOC, non-methane volatile organic compounds [air, non-urban air or from high stacks]: 6.25281e-8 kg
  Emission from direct release or combustion of landfill biogas.
- Nickel II [air, non-urban air or from high stacks]: 6.79275e-8 kg
  Emission from direct release or combustion of landfill biogas.
- Nitrogen oxides [air, non-urban air or from high stacks]: 5.08281e-6 kg
  Emission from direct release or combustion of landfill biogas.
- Particulate Matter, < 2.5 um [air, non-urban air or from high stacks]: 1.10955e-6 kg
  Emission from direct release or combustion of landfill biogas.
- Silicon [air, non-urban air or from high stacks]: 6.14702e-8 kg
  Emission from direct release or combustion of landfill biogas.
- Non-hazardous waste disposed [inventory indicator, waste]: 1 kg
  Inventory indicator for waste mass disposed in landfill. To be used in EN15804 "other data" results.
- Ammonium [water, ground-, long-term]: 3.77416e-12 kg
  Emissions from long-term leachate (>100a).
- Arsenic ion [water, ground-, long-term]: 0.000123433 kg
  Emissions from long-term leachate (>100a).
- BOD5, Biological Oxygen Demand [water, ground-, long-term]: 0.00356545 kg
  Emissions from long-term leachate (>100a).
- COD, Chemical Oxygen Demand [water, ground-, long-term]: 0.0150609 kg
  Emissions from long-term leachate (>100a).
- Cadmium II [water, ground-, long-term]: 0.00138507 kg
  Emissions from long-term leachate (>100a).
- Chromium VI [water, ground-, long-term]: 4.49654e-6 kg; lognormal variance with pedigree 3.2349, pedigree (1,1,4,1,1)
  Emissions from long-term leachate (>100a).
  Uncertainty: Uncertainty calculated from uncertainty of the waste composition of this waste, uncertainty in waste decomposition and short-term leaching in landfill
- Copper ion [water, ground-, long-term]: 0.0138583 kg
  Emissions from long-term leachate (>100a).
- DOC, Dissolved Organic Carbon [water, ground-, long-term]: 0.01377 kg
  Emissions from long-term leachate (>100a).
- Heat, waste [water, ground-, long-term]: 0.101962 MJ
  Emission from long-term decomposition of waste.
- Iron ion [water, ground-, long-term]: 0.0144034 kg; lognormal variance with pedigree 1.0703, pedigree (1,1,4,1,1)
  (same comment as for Chromium VI)
- Lead II [water, ground-, long-term]: 0.00153629 kg
  Emissions from long-term leachate (>100a).
- Magnesium [water, ground-, long-term]: 7.87311e-5 kg
  Emissions from long-term leachate (>100a).
- Nickel II [water, ground-, long-term]: 0.0075182 kg
  Emissions from long-term leachate (>100a).
- Nitrate [water, ground-, long-term]: 3.96914e-13 kg
  Emissions from long-term leachate (>100a).
- Nitrite [water, ground-, long-term]: 2.05418e-13 kg
  Emissions from long-term leachate (>100a).
- Nitrogen, organic bound [water, ground-, long-term]: 6.16862e-12 kg
  Emissions from long-term leachate (>100a).
- Phosphate [water, ground-, long-term]: 0.00515517 kg
  Emissions from long-term leachate (>100a).
- Silicon [water, ground-, long-term]: 0.000110616 kg
  Emissions from long-term leachate (>100a).
- TOC, Total Organic Carbon [water, ground-, long-term]: 0.01377 kg
  Emissions from long-term leachate (>100a).
