# miscanthus rhizome production, for planting

Dataset: EcoSpold 2, unit process
Geography: RoW
Time period: 2005-01-01 to 2022-12-31
Technology level: current
Classification: ISIC rev.4 ecoinvent: 0130:Plant propagation
Scenario: Business-as-Usual
System model: Substitution, consequential, long-term
Generated by: Julian Schnetzer
Published in: Hölscher T. 2007
Database: ecoinvent
isCopyrightProtected: true

## General comment
This dataset represents the production of 1 piece of miscanthus rhizome and 0.08 kg of chopped miscanthus as a by-product. Rhizomes are harvested 4 years after establishment of the plantation, miscanthus is harvested annually from second to fourth year. Moisture content of rhizomes at storage is 73.9%, number of harvested rhizomes is 500'000 (10'000 rhizomes planted; multiplication factor: 50), average weight of a rhizome is 70 g. Moisture content of chopped miscanthus at storage is 13% (= 15% water on a dry mass basis), dry matter yield at first harvest is 6'000 kg/ha, 17'000 kg/ha at second and third harvest.

This dataset has been copied from an original dataset covering the geography DE.

## Included activities start
This activity assumes miscanthus rhizome production for planting on a plantation with a lifetime of 4 years and represents the average expenditures of the production of 1 piece of miscanthus rhizome for planting (average weight 70 g). The inputs of mineral fertilisers, seed and pesticides are considered. It is assumed that no organic fertilisers are applied.

## Included activities end
The dataset includes all machine operations and corresponding machine infrastructure and sheds. Machine operations are: soil cultivation, planting, fertilisation, weed control, pest and pathogen control, harvest and chopping of miscanthus as a by-product, breaking up of rhizomes into pieces by a rotary tiller and harvest of rhizome pieces by an adjusted potato harvester, transport of all harvested goods from field to farm (2 km), and storage of rhizomes in a cold storage house during 1 month. Further, direct field emissions are included. This activity ends after cold storage of rhizomes at the farm gate.

## Technology
conventional production

## Reference product
- miscanthus rhizome, for planting: 1 unit; name REF_PRODUCT; By-product classification allocatable product; CPC 01961: Live plants; bulbs, tubers and roots; cuttings and slips; mushroom spawn
  production volume 3.10497e8 unit
    Calculated production volume (PV) based on knowledge of the regional production volumes. The PV of the global activity has been extrapolated using the nominal GDP of 2005 (source: United Nations, http://data.un.org/Glossary.aspx?q=GDP+%28current+US%24%29, accessed 20130726 and 20130312).
  property carbon content, non-fossil 0.46; name REF_PRODUCT_C_content_non_fossil
    biogene carbon content on a dry matter basis
  property dry mass 0.01827 kg; name REF_PRODUCT_DM; = REF_PRODUCT_WM*0.261
  property energy content 0.35 MJ; name REF_PRODUCT_energy_content
    as gross calorific value (when relevant). Approximated by miscanthus above ground biomass: Average of all entries for "miscanthus" > gross calorific value in BIOBIB - A Database for biofuels (http://www.vt.tuwien.ac.at/biobib/biobib.html).
  property price 0.175 EUR2005
    Price for rizome lays between 0,15 and 0.20 EUR/rizome. Information based on prices at producer in Germany, main producer in Europe (Fachagentur Nachwachsende Rohstoffe) http://www.bio-energie.de/heizen-mit-holz/miscanthus/
  property water content 2.83142; name REF_PRODUCT_water_content; = REF_PRODUCT_WWM/ REF_PRODUCT_DM
  property water in wet mass 0.05173 kg; name REF_PRODUCT_WWM; = REF_PRODUCT_WM- REF_PRODUCT_DM
  property wet mass 0.07 kg; name REF_PRODUCT_WM
  properties: carbon allocation 0.0084042 kg, carbon content 0.46

## Inputs from technosphere
- application of plant protection product, by field sprayer: 2e-6 ha; source Hölscher T. 2007; lognormal variance with pedigree 0.0413, pedigree (2,2,5,1,1)
  Application of glyphosate before planting.
- building, hall, steel construction: 1.75e-7 m2; source Hölscher T. 2007; lognormal variance with pedigree 0.3689, pedigree (5,5,5,3,4)
  Required infrastructure for cool house storage; estimated based on storage of potatoes ("potatoe seed production, Swiss integrated production, for setting"), scaled assuming a storage of 35 t/ha during one month, with the same bulk density as for potatoes (2m3/t), a stacking height of 6 m, and half of the area of the buliding being occupied by corridors.
- combine harvesting: 6e-6 ha; source Hölscher T. 2007; lognormal variance with pedigree 0.0412, pedigree (2,1,5,1,1)
  Approximation for the harvest of miscanthus above ground biomass. One pass per year from second to last year.
- electricity, low voltage: 5.32988e-7, 1.50715e-7, 4.86458e-6, 1.52046e-7, 4.88565e-6, 0.000292766, 3.26508e-5, 4.77325e-6, 2.13993e-7, 1.73963e-7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 kWh (46 suppliers, which the file names only by identifier); sum of these 0.00042583 kWh; source Hölscher T. 2007; lognormal variance with pedigree 0.0906, pedigree (5,5,5,5,1)
  Electricity for storage in cool house; estimate based on storage of potato ("potato seed production, Swiss integrated production, for setting"), scaled assuming storaage of 35 t/ha during one month, with the same bulk density as for potato (2 m3/t), a stacking height of 6 m, and half of the area of the buliding being occupied by corridors.
- fertilising, by broadcaster: 2e-6 ha; source Hölscher T. 2007; lognormal variance with pedigree 0.0412, pedigree (2,1,5,1,1)
  One application in the third year.
- fodder loading, by self-loading trailer: 0.000852 m3; source Hölscher T. 2007; lognormal variance with pedigree 0.0412, pedigree (2,1,5,1,1)
  Approximation for the loading and transport to the farm of chopped miscanthus.
- glyphosate: 3.6e-6 kg; source Hölscher T. 2007; lognormal variance with pedigree 0.0413, pedigree (2,2,5,1,1)
  Application before planting.
  properties: carbon content, fossil 0.214286, dry mass 1 kg, wet mass 1 kg
- harvesting, by complete harvester, ground crops: 2e-6 ha; source Hölscher T. 2007; lognormal variance with pedigree 0.0412, pedigree (2,1,5,1,1)
  Approximation for harvest of miscanthus rhizomes.
- hoeing: 6e-6 ha; source Hölscher T. 2007; lognormal variance with pedigree 0.0412, pedigree (2,1,5,1,1)
  Two passes in the year of establishment, one pass in the second year.
- inorganic nitrogen fertiliser, as N: 5.35081e-7, 9.66534e-8, 1.73029e-6, 1.18077e-8, 1.30233e-6, 1.51606e-7, 1.10205e-7, 1.22465e-5, 9.97771e-7, 5.86895e-7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 kg (63 suppliers, which the file names only by identifier); sum of these 0.0001 kg; source Hölscher T. 2007; lognormal variance with pedigree 0.0412, pedigree (2,1,5,1,1)
  50 kg N/(ha*a) in the third year.
  properties: dry mass 1 kg, wet mass 1 kg
- magnesium oxide: 4.7667e-5 kg; source Hölscher T. 2007; lognormal variance with pedigree 0.0412, pedigree (2,1,5,1,1)
  24 kg of magnesium oxide ha and year in the third year.
  properties: dry mass 1 kg, wet mass 1 kg
- miscanthus rhizome, for planting: 0.02 unit; name SEED; source Hölscher T. 2007; lognormal variance with pedigree 0.0413, pedigree (2,2,5,1,1)
  10000 pcs/ha.
  property carbon content, non-fossil 0.46; name SEED_C_content_non_fossil
  property dry mass 0.01827 kg; name SEED_DM; = SEED_WM*0.261
  property water content 2.83142; name SEED_water_content; = SEED_WWM/ SEED_DM
  property water in wet mass 0.05173 kg; name SEED_WWM; = SEED_WM- SEED_DM
  property wet mass 0.07 kg; name SEED_WM
- miscanthus, chopped: -0.08 kg; name BY_PRODUCT
  This exchange refers to the variety Miscanthus giganteus, which is mainly grown as a biofuel.
  production volume
    Production volume calculated relative to that of reference product.
  property carbon content, non-fossil 0.48; name BY_PRODUCT_C_content_non_fossil
  property energy content 19.2123 MJ; name BY_PRODUCT_energy_content
  property water content 0.149425; name BY_PRODUCT_water_content; = BY_PRODUCT_WWM/ BY_PRODUCT_DM
  property water in wet mass 0.149425 kg; name BY_PRODUCT_WWM; = BY_PRODUCT_WM- BY_PRODUCT_DM
  property wet mass 1.14943 kg; name BY_PRODUCT_WM; = BY_PRODUCT_DM/0.87
  properties: dry mass 1 kg, price 0.175 EUR2005
  note on carbon content, non-fossil: biogene carbon content on a dry matter basis; obtained from BIOBIB - A Database for biofuels. http://www.vt.tuwien.ac.at/biobib/biobib.html.
  note on energy content: as gross calorific value (when relevant). Average of all entries for "miscanthus" > gross calorific value in BIOBIB - A Database for biofuels (http://www.vt.tuwien.ac.at/biobib/biobib.html).
- mulching: 2e-6 ha; source Hölscher T. 2007; lognormal variance with pedigree 0.0412, pedigree (2,1,5,1,1)
  One pass before establishment.
- packaging, for fertilisers: 0.000941334 kg; lognormal variance with pedigree 0.0912, pedigree (4,3,5,5,4)
  Total amount of active substance/s of fertilisers needed for the production of 'miscanthus rhizome, for planting' is calculated to be circa 4.71E-04 kg. Fertiliser/s used in this dataset is/are: 'magnesium oxide', 'nitrogen fertiliser, as N', 'phosphate rock, as P2O5, beneficiated, dry', 'potassium sulfate, as K2O'. The total amount of active substance/s is doubled in order to account for the packaging of the dilluted product of fertiliser/s that is/are applied. Therefore, 9.41E-04 kg of packaging for fertilisers is justified with this exchange.
  properties: carbon content, fossil 0.825301, dry mass 1 kg, heating value, net 25.01 MJ, price 0.0642 EUR2005, wet mass 1 kg
  note on carbon content, fossil: Considering a chemical formula (C2H4)n for polyethylene, carbon content-fossil is calculated to be 0.856286 kg of Carbon per kg of dry mass.
- packaging, for pesticides: 7.2e-6 kg; lognormal variance with pedigree 0.0912, pedigree (4,3,5,5,4)
  Total amount of active substance/s of pesticides needed for the production of miscanthus rhizome, for planting is calculated to be circa 3.60E-06 kg. Pesticide/s used in this dataset is/are: 'glyphosate'. The total amount of active substance/s is doubled in order to account for the packaging of the dilluted product of pesticide/s that is/are applied. Therefore, 7.20E-06 kg of packaging for pesticides is justified with this exchange.
  properties: carbon content, fossil 0.85714, dry mass 1 kg, heating value, net 25.97 MJ, price 0.0642 EUR2005, wet mass 1 kg
- phosphate rock, beneficiated: 0.000258755, 3.43518e-6, 3.43518e-6 kg (3 suppliers, which the file names only by identifier); sum of these 0.000265625 kg; source Hölscher T. 2007; lognormal variance with pedigree 0.0412, pedigree (2,1,5,1,1)
  The exchange has been updated from 'phosphate rock, as P2O5, beneficiated, dry' into 'phosphate rock, beneficiated' and therefore its amount has been scaled (multiplied) from 0.0001 kg by 3.125 kg of 'phosphate rock, beneficiated' per kg of 'phosphate rock, as P2O5, beneficiated, dry'. Original comment of the exchange is: 42.5 kg P2O5/(ha*a) in the third year.
  properties: dry mass 1 kg, wet mass 1 kg
- potassium sulfate: 0.000440291 kg; source Hölscher T. 2007; lognormal variance with pedigree 0.0412, pedigree (2,1,5,1,1)
  The exchange has been updated from 'potassium sulfate, as K2O' into 'potassium sulfate' and therefore its amount has been scaled (multiplied) from 0.0002 kg by 1.85 kg of 'potassium sulfate' per kg of 'potassium sulfate, as K2O'. Original comment of the exchange is: 119 kg K2O/(ha*a) in the third year.
  properties: dry mass 1 kg, wet mass 1 kg
- potato planting: 2e-6 ha; source Hölscher T. 2007; lognormal variance with pedigree 0.0412, pedigree (2,1,5,1,1)
  Approximation for planting of miscanthus rhizome pieces. 10000 pcs/ha.
- tillage, currying, by weeder: 2e-6 ha; source Hölscher T. 2007; lognormal variance with pedigree 0.0412, pedigree (2,1,5,1,1)
  One pass in the year of establishment.
- tillage, harrowing, by spring tine harrow: 4e-6 ha; source Hölscher T. 2007; lognormal variance with pedigree 0.0412, pedigree (2,1,5,1,1)
  Two passes in the year of establishment.
- tillage, ploughing: 2e-6 ha; source Hölscher T. 2007; lognormal variance with pedigree 0.0412, pedigree (2,1,5,1,1)
  One pass in the year of establishment.
- tillage, rolling: 2e-6 ha; source Hölscher T. 2007; lognormal variance with pedigree 0.0412, pedigree (2,1,5,1,1)
  One pass in the year of establishment.
- tillage, rotary cultivator: 4e-6 ha; source Hölscher T. 2007; lognormal variance with pedigree 0.0412, pedigree (2,1,5,1,1)
  Two passes for breaking rhizomes into pieces before rhizome harvest.
- transport, tractor and trailer, agricultural: 5.7834e-7, 0.000142222 metric ton*km (2 suppliers, which the file names only by identifier); sum of these 0.0001428 metric ton*km; source Hölscher T. 2007; lognormal variance with pedigree 0.1684, pedigree (4,1,5,1,1)
  Transport of miscanthus rhizomes to field for planting and of harvested rhizomes from field to farm. Distance: 2 km.

## Inputs from nature
- Carbon dioxide, in air [natural resource, in air]: 0.170999 kg; = 44/12 * (REF_PRODUCT_C_content_non_fossil * REF_PRODUCT * REF_PRODUCT_DM + BY_PRODUCT_C_content_non_fossil * BY_PRODUCT * BY_PRODUCT_DM - SEED_C_content_non_fossil * SEED * SEED_DM); lognormal variance with pedigree 0.0818, pedigree (2,2,5,1,1)
  Modelled, see chapter 'Release of fossil CO2 after urea applications' in "01_crop production_assessment methods of direct field emissions_v1.0.pdf" - pdf-document on the dedicated talk page of ecoinvent (www.ecoinvent.org/documentation)
- Energy, gross calorific value, in biomass [natural resource, biotic]: 19.212 MJ; lognormal variance with pedigree 0.0819, pedigree (2,3,5,3,4)
  Average of all entries for "miscanthus" > gross calorific value in BIOBIB - A Database for biofuels (http://www.vt.tuwien.ac.at/biobib/biobib.html).
- Occupation, permanent crop, non-irrigated, intensive [natural resource, land]: 0.075014 m2*year; lognormal variance with pedigree 0.0429, pedigree (2,1,5,1,1)
  Modelled, see chapter 'Land use' in "01_crop production_direct field emissions and natural resources_v1.0.pdf" - pdf-document on the dedicated talk page of ecoinvent (www.ecoinvent.org/documentation)
- Transformation, from arable land, unspecified use [natural resource, land]: 0.02 m2; lognormal variance with pedigree 0.0489, pedigree (2,1,5,1,1)
  (same comment as for Occupation, permanent crop, non-irrigated, intensive)
- Transformation, to permanent crop, non-irrigated, intensive [natural resource, land]: 0.02 m2; lognormal variance with pedigree 0.0489, pedigree (2,1,5,1,1)
  (same comment as for Occupation, permanent crop, non-irrigated, intensive)

## Emissions to nature
- Ammonia [air, non-urban air or from high stacks]: 2.4318e-6 kg; lognormal variance with pedigree 0.049, pedigree (2,2,5,1,1)
  Modelled with the 'AGRAMMON model' described in "01_crop production_direct field emissions and natural resources_v1.0.pdf" - pdf-document on the dedicated talk page of ecoinvent (www.ecoinvent.org/documentation)
- Dinitrogen monoxide [air, non-urban air or from high stacks]: 1.9625e-6 kg; lognormal variance with pedigree 0.0818, pedigree (2,2,5,1,1)
  Modelled, see chapter 'Emissions of N2O to the air' in "01_crop production_direct field emissions and natural resources_v1.0.pdf" - pdf-document on the dedicated talk page of ecoinvent (www.ecoinvent.org/documentation)
- Nitrogen oxides [air, non-urban air or from high stacks]: 4.1212e-7 kg; lognormal variance with pedigree 0.0818, pedigree (2,2,5,1,1)
  Modelled, see chapter 'Emissions of NOx to the air' in "01_crop production_direct field emissions and natural resources_v1.0.pdf" - pdf-document on the dedicated talk page of ecoinvent (www.ecoinvent.org/documentation)
- Cadmium II [soil, agricultural]: 2.2258e-9 kg; lognormal variance with pedigree 0.0818, pedigree (2,2,5,1,1)
  Modelled, see chapter 'Emissions of heavy metals to agricultural soil, surface water and ground water' in "01_crop production_direct field emissions and natural resources_v1.0.pdf" - pdf-document on the dedicated talk page of ecoinvent (www.ecoinvent.org/documentation)
- Chromium III [soil, agricultural]: -5.6496e-9 kg
  (same comment as for Cadmium II)
- Copper ion [soil, agricultural]: -6.1624e-8 kg
  (same comment as for Cadmium II)
- Glyphosate [soil, agricultural]: 3.6e-6 kg; lognormal variance with pedigree 0.049, pedigree (2,2,5,1,1)
  Modelled, see chapter 'Emissions of pesticides to agricultural soil' in "01_crop production_direct field emissions and natural resources_v1.0.pdf" - pdf-document on the dedicated talk page of ecoinvent (www.ecoinvent.org/documentation)
- Lead II [soil, agricultural]: 1.0746e-9 kg; lognormal variance with pedigree 0.0818, pedigree (2,2,5,1,1)
  (same comment as for Cadmium II)
- Mercury II [soil, agricultural]: 2.8587e-12 kg; lognormal variance with pedigree 0.0818, pedigree (2,2,5,1,1)
  (same comment as for Cadmium II)
- Nickel II [soil, agricultural]: -3.7606e-8 kg
  (same comment as for Cadmium II)
- Zinc II [soil, agricultural]: -1.3308e-6 kg
  (same comment as for Cadmium II)
- Cadmium II [water, ground-]: 8.2093e-11 kg; lognormal variance with pedigree 0.1271, pedigree (2,2,5,1,1)
  (same comment as for Cadmium II)
- Cadmium II [water, surface water]: 8.1737e-11 kg; lognormal variance with pedigree 0.1271, pedigree (2,2,5,1,1)
  (same comment as for Cadmium II)
- Chromium III [water, ground-]: 4.1729e-8 kg; lognormal variance with pedigree 0.1271, pedigree (2,2,5,1,1)
  (same comment as for Cadmium II)
- Chromium III [water, surface water]: 9.8399e-9 kg; lognormal variance with pedigree 0.1271, pedigree (2,2,5,1,1)
  (same comment as for Cadmium II)
- Copper ion [water, ground-]: 7.9594e-9 kg; lognormal variance with pedigree 0.1271, pedigree (2,2,5,1,1)
  (same comment as for Cadmium II)
- Copper ion [water, surface water]: 9.2181e-9 kg; lognormal variance with pedigree 0.1271, pedigree (2,2,5,1,1)
  (same comment as for Cadmium II)
- Lead II [water, ground-]: 1.5918e-10 kg; lognormal variance with pedigree 0.1271, pedigree (2,2,5,1,1)
  (same comment as for Cadmium II)
- Lead II [water, surface water]: 1.0731e-9 kg; lognormal variance with pedigree 0.1271, pedigree (2,2,5,1,1)
  (same comment as for Cadmium II)
- Mercury II [water, ground-]: 1.2228e-12 kg; lognormal variance with pedigree 0.1271, pedigree (2,2,5,1,1)
  (same comment as for Cadmium II)
- Mercury II [water, surface water]: 1.6386e-12 kg; lognormal variance with pedigree 0.1271, pedigree (2,2,5,1,1)
  (same comment as for Cadmium II)
- Nickel II [water, surface water]: 6.5961e-9 kg; lognormal variance with pedigree 0.1271, pedigree (2,2,5,1,1)
  (same comment as for Cadmium II)
- Nitrate [water, ground-]: 0.00013511 kg; lognormal variance with pedigree 0.0818, pedigree (2,2,5,1,1)
  Modelled with the 'SALCA-NO3 model' described in "01_crop production_direct field emissions and natural resources_v1.0.pdf" - pdf-document on the dedicated talk page of ecoinvent (www.ecoinvent.org/documentation)
- Phosphate [water, ground-]: 1.6092e-6 kg; lognormal variance with pedigree 0.0818, pedigree (2,2,5,1,1)
  Modelled, see chapter 'Emissions of phosphorous to the water' in "01_crop production_direct field emissions and natural resources_v1.0.pdf" - pdf-document on the dedicated talk page of ecoinvent (www.ecoinvent.org/documentation)
- Phosphate [water, surface water]: 5.9098e-6 kg; lognormal variance with pedigree 0.0818, pedigree (2,2,5,1,1)
  (same comment as for Phosphate)
- Phosphorus [water, surface water]: 1.4782e-6 kg; lognormal variance with pedigree 0.0818, pedigree (2,2,5,1,1)
  (same comment as for Phosphate)
- Zinc II [water, ground-]: 5.47e-8 kg; lognormal variance with pedigree 0.1271, pedigree (2,2,5,1,1)
  (same comment as for Cadmium II)
- Zinc II [water, surface water]: 1.7054e-8 kg; lognormal variance with pedigree 0.1271, pedigree (2,2,5,1,1)
  (same comment as for Cadmium II)

## Sampling procedure
The inventories were generated on the basis of data from the 'GruBE' project (Hölscher et al. 2007) and complemented with information from expert estimates, extension service documents and literature. The sources used in the project were KTBL (2006) and personal communications from producers. --- Sources: Hölscher T., Deinmling S., Freiermuth Knuchel R., Gaillard G., Kägi T. & Müller-Sämann K. (2007) Energieoptionen aus landwirtschaftlicher Biomasse am Oberrhein - Auswirkungen für Landwirtschaft und Umwelt - Endbericht zum Projekt. Agentur für Nachhaltige Nutzung von Agrarlandschaften (ANNA). Müllheim, Germany. --- KTBL (2006) Energiepflanzen. Daten für die Planung des Energiepflanzenanbaus. Kuratorium für Technik und Bauwesen in der Landwirtschaft, Darmstadt, 372 p.

## Extrapolations
[This dataset has been copied from an original dataset covering the geography DE.] The amounts of the flows are averages across all years of the plantation lifetime. Electricity consumption and infrastructure for cold storage house were extrapolated from the dataset 'potato seed production, Swiss integrated production, for setting".
