# petroleum coke to generic market for coke

Dataset: EcoSpold 2, unit process
Geography: GLO
Time period: 2005-01-01 to 2022-12-31
Technology level: current
Classification: ISIC rev.4 ecoinvent: 1910:Manufacture of coke oven products
Scenario: Business-as-Usual
System model: Substitution, consequential, long-term
Generated by: Sofia Parada Tur
Database: ecoinvent
isCopyrightProtected: true

## General comment
petroleum coke and coal coke can partly be traded on the same market, because some uses requiring coke (ie. fuel purposes) do not require a specific type of coke. The purpose of this activity is to link certain amount of a specific petroleum coke to the coke market, in which both products are sustitutable by another.

## Included activities end
This activity renames part of the petroleum coke to "coke" for sale on thie more generic coke market.

## Parameters
- fraction: 0.802 dimensionless; name fraction_of_crude_oil_PV_to_refinery; lognormal variance with pedigree 0.0086, pedigree (4,1,1,1,1)
  According to literature (USDA, http://usda.mannlib.cornell.edu/MannUsda/viewDocumentInfo.do?documentID=1290 and http://lipidlibrary.aocs.org/market/nonfood.htm) 19.8% of vegetable oil, crude produced is further processed to be used for non-food products. The remaining 80.2 % is refined into vegetable oil, refined and used during food production.
- fraction_to_generic_market: 0.9 % (obsolete); lognormal variance with pedigree 0.0406, pedigree (5,1,1,1,1)
  It is assumed that 90% of palm oil, refined is traded on generic vegetable oil market, i.e. its buyers do not care what type of vegetable oil they are buying. Remaining 10% of the production volume (PV) is assumed to be used for uses, where specific type of vegetable oil is required and cannot be substituted by any other vegetable oil.

## Reference product
- petroleum coke: 1 kg; By-product classification allocatable product; CPC 33: Coke oven products; refined petroleum products; nuclear fuel; CAS 64741-79-3
  production volume 1 kg
  properties: carbon allocation 0.885 kg, carbon content 0.885, carbon content, fossil 0.885, carbon content, non-fossil 0, dry mass 1 kg, heating value, net 35 MJ, price 0 EUR2005, water content 0, water in wet mass 0 kg, wet mass 1 kg

## Inputs from technosphere
- coke: 35 MJ; name coke_RP
  production volume
    Assumption. Due to lack of specific data, it has been assumed that 10% of total petroleum coke production can be substituted by coke and vice-versa. THis is assumed in the use of coke as a fuel in industry applications.
    The total quantity of petroleum coke has been copied from the global ecoinvent inventory "petroleum refinery operation", in which petroleum coke is a byproduct and its production volume is calcualted based on the petroleum crude input, as follows:
    Total crude throughput 700 mio. tonnes in 2000 in ca. 100 refineries in RER
    Calculated from an input of 575E+9 kg crude petroleum (Reinaud J. (2005). The European Refinery Industry under the EU Emissions Trading Scheme. IEA) and the corresponding output relations of the dataset
    Extrapolated from the RER production data. IEA statistics from 2009 show that RER production constitutes 16.9% of global production.
  properties: carbon content, fossil 0.869149, dry mass 0.0328671 kg, heating value, net 28.6 MJ, price 0.006 EUR2005, water content 0.0638298, wet mass 0.034965 kg

## Review by Bo Weidema 2012-07-26
passed
