# chichibabin pyridine synthesis

Dataset: EcoSpold 2, unit process
Geography: RoW
Time period: 2010-01-01 to 2022-12-31
Technology level: current
Classification: ISIC rev.4 ecoinvent: 2011:Manufacture of basic chemicals
Scenario: Business-as-Usual
System model: Substitution, consequential, long-term
Generated by: Jürgen Sutter
Database: ecoinvent
isCopyrightProtected: true

## General comment
The most important method for the manufacture of pyridine is the Chichibabin pyridine synthesis.
Pyridine (C5H5N; CAS 110-86-1, arabenzene, azine) is a colourless liquid. It is miscible in all proportions with water and most common organic solvents and has a boiling point 35 °C higher than benzene.Acetaldehyde and formaldehyde react with ammonia to give mainly pyridine: they appear to first form acrolein, and then acrolein and formaldehyde react with ammonia to give pyridine. Simultaneously, 2-, 3-, and 4-methylpyridines are formed, This method is one of the most widely used for pyridine production.
Frischknecht R., Jungbluth N., Althaus H.-J., Doka G., Dones R., Heck T., Hellweg S., Hischier R., Nemecek T., Rebitzer G. and Spielmann M. (2007) Overview and Methodology. Final report ecoinvent v2.0 No. 1. Swiss Centre for Life Cycle Inventories, Dübendorf, CH, retrieved from: www.ecoinvent.org.

Gendorf (2000) Umwelterklärung 2000, Werk Gendorf. Werk Gendorf, Burgkirchen as pdf-File under: http://www.gendorf.de/pdf/umwelterklaerung2000.pdf

Shinkichi Shimizu, Nanao Watanabe, Toshiaki Kataoka, Takayuki Shoji, Nobuyuki Abe, Sinji Morishita, Hisao Ichimura: Pyridine and Pyridine Derivatives. Published online: 2000. In: Ullmann's Encyclopedia of Industrial Chemistry, Seventh Edition, 2004 Electronic Release (ed. Fiedler E., Grossmann G., Kersebohm D., Weiss G. and Witte C.). 7 th Electronic Release Edition. Wiley InterScience, New York, Online-Version under: DOI: 10.1002/14356007.a22_399

## Included activities end
Chichibabin synthesis of pyridine including materials, energy uses, infrastructure and emissions.

## Geography
The inventory is modelled for the world.

## Technology
Chichibabin synthesis of oyridine

## Time period
Time of publications

## Parameters
- fraction, cooling water, cooling pond system, to air: 0.032 dimensionless; name fraction_CW_CP_to_air; lognormal variance with pedigree 0.0413, pedigree (2,3,1,3,1)
  Calculated based on literature value (Scown, C.D., 2011, Water Footprint of U.S. Transportation Fuels and supplying information of the article) (Vionnet, S., Quantis Water Database - Technical Report, 2012).
- fraction, cooling water, once-through system, to air: 0.004 dimensionless; name fraction_CW_OT_to_air; lognormal variance with pedigree 0.0413, pedigree (2,3,1,3,1)
  (same comment as for fraction, cooling water, cooling pond system, to air)
- fraction, cooling water, recirculating system, to air: 0.771 dimensionless; name fraction_CW_R_to_air; lognormal variance with pedigree 0.0413, pedigree (2,3,1,3,1)
  (same comment as for fraction, cooling water, cooling pond system, to air)
- fraction, cooling water, to air: 0.3875 dimensionless; name fraction_CW_to_air; = (0.5*fraction_CW_OT_to_air)+(0.5*fraction_CW_R_to_air); lognormal variance with pedigree 0.092025, pedigree (4,4,3,2,4)
  Calculated value based on literature value (see comments of the other parametres present in this dataset) and expert opinion. In the case when no industry/literature data are available about the type of cooling or directly fraction, cooling water, to air specific for the process a default assumption is applied. It is assumed that the once-through cooling system is used in 50% of all cases and recirculating system is used in another 50% of all cases.

## Reference product
- pyridine: 1 kg; name RP_amount_1; By-product classification allocatable product; CPC 35230: Lactones n.e.c., heterocyclic compounds with nitrogen hetero-atom(s) only, containing an unfused pyrazole ring[…]; CAS 110-86-1
  Stoichiometric caclulation
  production volume 7e6 kg
    Expert Judgement
  property carbon content, fossil 0.759215
    Calculated based on molecular structure. See tab "chemicals".
  property heating value, net 30.66 MJ
    LHV is calculated based on the elemental composition of the substance. Based on the CAS number of the substance (000110-86-1), which is found manually, the chemical formula of the substance is found to be: C5H5N, (PubChem 2020).
    Reference: Kim, S., Chen, J., Cheng, T., Gindulyte, A., He, J., He, S., Li, Q., Shoemaker, B. A., Thiessen, P. A., Yu, B., Zaslavsky, L., Zhang, J., & Bolton, E. E. (2019). PubChem 2019 update: improved access to chemical data. Nucleic acids research, 47(D1), D1102–D1109. https://doi.org/10.1093/nar/gky1033
  property price 10.2 EUR2005
    2005 import and export prices (total trades (USD) divided by total weight (kg); average 2005 prices for EU27, USA, China, Japan and India from Import/Export data (US$ and tonnes) in UN Commodity Trade Statistics Database from UN Commodity Trade Statistics Database. Commodity: Pyridine and its salts
  properties: carbon allocation 0.759215 kg, carbon content 0.759215, carbon content, non-fossil 0, dry mass 1 kg, water content 0, water in wet mass 0 kg, wet mass 1 kg

## Inputs from technosphere
- acetaldehyde: 2.77469 kg; lognormal variance with pedigree 0.0502, pedigree (1,3,5,3,1)
  Uncertainty: Stoechiometric calculation
  properties: carbon content, fossil 0.545296, dry mass 1 kg, heating value, net 27.53 MJ, wet mass 1 kg
- ammonia, anhydrous, liquid: 0.011992, 0.00243988, 0.0232789, 0.08967, 0.0109072, 0.00722284, 0.258032, 0.0237604 kg (8 suppliers, which the file names only by identifier); sum of these 0.427303 kg; lognormal variance with pedigree 0.0502, pedigree (1,3,5,3,1)
  Stoichiometric caclulation
  Uncertainty: Stoechiometric calculation
  properties: dry mass 1 kg, wet mass 1 kg
- chemical factory, organics: 7.54717e-10 unit; lognormal variance with pedigree 0.3184, pedigree (4,5,5,5,5)
  Estimation
  Uncertainty: Estimation
- electricity, medium voltage: 0.0597597, 0.0414009, 0.00221906, 0.493057, 0.00223592, 0.0284081 kWh (6 suppliers, which the file names only by identifier); sum of these 0.627081 kWh; lognormal variance with pedigree 0.1875, pedigree (4,5,5,5,5)
  Estimation
  Uncertainty: Stoechiometric calculation
- formaldehyde: 0.771643 kg; lognormal variance with pedigree 0.0502, pedigree (1,3,5,3,1)
  Stoichiometric caclulation
  Uncertainty: Stoechiometric calculation
  properties: carbon content, fossil 0.4, dry mass 1 kg, heating value, net 20.19 MJ, wet mass 1 kg
- heat, from steam, in chemical industry: 3.77358 MJ; lognormal variance with pedigree 0.1786, pedigree (4,5,5,5,5)
  Estimation
  Uncertainty: Estimation
  properties: heating value, net 1 MJ
- hydrogen, liquid: -0.429245 kg; name BP_amount_1
  Stoichiometric caclulation
  production volume
    Calculated from production volume of reference product using the relative outputs.
  properties: dry mass 1 kg, heating value, net 120.21 MJ, price 2.68 EUR2005, wet mass 1 kg

## Inputs from nature
- Water, cooling, unspecified natural origin [natural resource, in water]: 0.045283 m3; name water_cooling_UNO_input; lognormal variance with pedigree 0.0502, pedigree (1,3,5,3,1)
  Estimation
  Estimation
  Uncertainty: Estimation

## Emissions to nature
- Acetaldehyde [air, urban air close to ground]: 0.00554939 kg; lognormal variance with pedigree 0.1786, pedigree (4,5,5,5,5)
  Estimation
  Uncertainty: Estimation
- Ammonia [air, urban air close to ground]: 0.000854883 kg; lognormal variance with pedigree 0.1786, pedigree (4,5,5,5,5)
  Estimation
  Uncertainty: Estimation
- Carbon dioxide, fossil [air, urban air close to ground]: 1.24889 kg; lognormal variance with pedigree 0.1786, pedigree (4,5,5,5,5)
  From water treatment
  Uncertainty: Estimation
- Formaldehyde [air, urban air close to ground]: 0.0015086 kg; lognormal variance with pedigree 0.1786, pedigree (4,5,5,5,5)
  Estimation
  Uncertainty: Estimation
- Water [air, unspecified]: 0.0175472 m3; name water_to_air_unspecified; = water_cooling_UNO_input*fraction_CW_to_air; lognormal variance with pedigree 0.130025, pedigree (4,4,5,2,4)
  Calculated value based on literature values and expert opinion. See comments in the parametres' comment field.
  property fraction, origin: fresh water 0; name fraction_origin_fresh_water
  property fraction, origin: salt water 0; name fraction_origin_salt_water
  property fraction, origin: unspecified 1; name fraction_origin_unspecified
- Acetaldehyde [water, surface water]: 0.0667314 kg; lognormal variance with pedigree 0.1786, pedigree (4,5,5,5,5)
  Estimation
  Uncertainty: Estimation
- Ammonium [water, surface water]: 0.122808 kg; lognormal variance with pedigree 0.1786, pedigree (4,5,5,5,5)
  Estimation
  Uncertainty: Estimation
- BOD5, Biological Oxygen Demand [water, surface water]: 1.32009 kg; lognormal variance with pedigree 0.218, pedigree (4,5,5,5,5)
  From water emissions
  Uncertainty: Estimation
- COD, Chemical Oxygen Demand [water, surface water]: 0.122808 kg; lognormal variance with pedigree 0.218, pedigree (4,5,5,5,5)
  From water emissions
  Uncertainty: Estimation
- DOC, Dissolved Organic Carbon [water, surface water]: 0.0378468 kg; lognormal variance with pedigree 0.218, pedigree (4,5,5,5,5)
  From water emissions
  Uncertainty: Estimation
- Formaldehyde [water, surface water]: 0.00362098 kg; lognormal variance with pedigree 0.1786, pedigree (4,5,5,5,5)
  Estimation
  Uncertainty: Estimation
- TOC, Total Organic Carbon [water, surface water]: 0.0378468 kg; lognormal variance with pedigree 0.218, pedigree (4,5,5,5,5)
  From water emissions
  Uncertainty: Estimation
- Water [water, unspecified]: 0.0277358 m3; name water_to_water_unspecified; = water_cooling_UNO_input*(1-fraction_CW_to_air); lognormal variance with pedigree 0.130025, pedigree (4,4,5,2,4)
  (same comment as for Water)
  property fraction, origin: fresh water 0; name fraction_origin_fresh_water_Ww
  property fraction, origin: salt water 0; name fraction_origin_salt_water_Ww
  property fraction, origin: unspecified 1; name fraction_origin_unspecified_Ww

## Extrapolations
Transports and emissions are modelled with standard methods.
