# ground granulated blast furnace slag to generic market for supplementary cementitious materials

Dataset: EcoSpold 2, unit process
Geography: IN
Time period: 2019-01-01 to 2022-12-31
Technology level: current
Classification: ISIC rev.4 ecoinvent: 2394:Manufacture of cement, lime and plaster
Scenario: Business-as-Usual
System model: Substitution, consequential, long-term
Generated by: Lucia Valsasina
Database: ecoinvent
isCopyrightProtected: true

## General comment
This activity is a renaming activity, linking ground granulated blast furnace slag to the generic market for supplementary cementitious materials (SCM).

## Included activities start
The activity starts with the input of GGBFS.

## Included activities end
With the provision of a generic kg of supplementary cementitious materials.

## Reference product
- ground granulated blast furnace slag: 1 kg; name GGBFS; By-product classification allocatable product; CPC 37440: Portland cement, aluminous cement, slag cement and similar hydraulic cements, except in the form of clinkers
  This activity is a renaming activity, linking ground granulated blast furnace slag to the generic market for supplementary cementitious materials (SCM).
  production volume 1 kg
  property carbon content, fossil 0; name GGBFS_C_content_fossil
    Industry value; Arcelor Mittal, chemical composition of blast furnace slag (http://www.cst.com.br/english/products/co_products/catalog_products/blast_slag/blast_slag.asp, accessed: 20121003).
  properties: carbon allocation 0 kg, carbon content 0, carbon content, non-fossil 0, dry mass 1 kg, price 0 EUR2005, water content 0, water in wet mass 0 kg, wet mass 1 kg

## Inputs from technosphere
- supplementary cementitious materials: 1 kg; name SCM
  production volume
    Ground granulated blast furnace slag main use is as a alternative constitutents for cement production. It is here assumed that 30% of GGBFS goes to the generic market for supplementary cementitious materials (SCMs). GGBFS is one of the main SCMs used today. The production volume of GGBFS is taken from the PV of the regional production activites (accessed 17th June 2019).
  property water content 0; name SCM_water_content
  property water in wet mass 0 kg; name SCM_WWM
  properties: dry mass 1 kg, price 0.075 EUR2005, wet mass 1 kg
