# meat and bone meal to generic market for protein feed

Dataset: EcoSpold 2, unit process
Geography: RoW
Time period: 2016-01-01 to 2022-12-31
Technology level: current
Classification: ISIC rev.4 ecoinvent: 1080:Manufacture of prepared animal feeds
Scenario: Business-as-Usual
System model: Substitution, consequential, long-term
Generated by: Avraam Symeonidis
Database: ecoinvent
isCopyrightProtected: true

## General comment
This activity is a linking activity, i.e. it connects meat and bone meal with the generic market for protein feed. Meat and bone meal is used partially as a feed for animals, thus traded on generic feed market with other protein - containing products.

## Included activities start
The activity starts with the reception of meat and bone meal.

## Included activities end
Valid for all linking activities: The activity models the part of meat and bone meal which contributes to the generic market for protein feed.

## Reference product
- meat and bone meal: 1 kg; name meat_and_bone_meal; By-product classification allocatable product; CPC 39110: Raw offal, inedible (including pigs' bristles, horse hair, animal guts, bird skins, feathers, bones and ivory)
  Meat and bone meal from the treatment of slaughterhouse waste, rendering.
  property carbon content, fossil 0; name meat_and_bone_meal_C_content_fossil
    fossil carbon content on a dry matter basis
  property carbon content, non-fossil 0.521; name meat_and_bone_mea_C_content_non_fossil_0
    Boesch & Hellweg 2010, 2010, Boesch, M.E., Hellweg, S., Identifying Improvement Potentials in Cement Production with Life Cycle Assessment, Environmental Science & Technology, 44, 23, 9143-9149, 1 - Article, Supporting information is available via http://pubs.acs.org
  property dry mass 0.958 kg; name DM_NABM
  property gross energy, feed per kg of dry mass 17.7 MJ/kg; name GE_NABM
    Literature value from Feedipedia.
    Reference: Feedipedia, Animal feed resources information system. Accessed at: https://www.feedipedia.org/node/222 on 13.04.2018
  property heating value, net 21.45 MJ; name meat_and_bone_meal_Net_Heat_Value
    net (lower) heating (calorific) value
  property protein content 0.549; name PC_NABM
    (same comment as for meat and bone meal)
  property water content 0.0438413; name meat_and_bone_meal_water_content
  property water in wet mass 0.042 kg; name meat_and_bone_meal_WWM
  properties: carbon allocation 0.499118 kg, carbon content 0.521, price 0 EUR2005, wet mass 1 kg

## Inputs from technosphere
- energy feed, gross: 0.777747, 16.1789 MJ (2 suppliers, which the file names only by identifier); sum of these 16.9566 MJ; = GE_NABM* DM_NABM
  Calculated based on literature value for fish oil, 17.7 MJ/kg DM as reported in Feedipedia.
  References:
  Feedipedia, Animal feed resources information system: Accessed at https://www.feedipedia.org/node/222 on13/04/2018.
  production volume
    Calculated from production volume of reference product using the relative outputs.
  properties: dry mass 1 kg, price 0.0108 EUR2005, wet mass 1 kg
- protein feed, 100% crude: 0.525942 kg; name RP_amount_1; = PC_NABM*DM_NABM
  production volume
    Using expert judgement the amount of meat and bone meal driven to protein market is circa 43.5% of the total production volume. Hence, the amount of protein feed, 100% crude is circa 3.462E+09 kg.
  properties: carbon content, non-fossil 0.53, dry mass 1 kg, price 0.424 EUR2005, wet mass 1 kg

## Sampling procedure
The data is primarily sourced from literature and statistics.
