# rare earth oxides production, from rare earth oxide concentrate, 50% REO

Dataset: EcoSpold 2, unit process
Geography: CN-NM
Time period: 2017-01-01 to 2022-12-31
Technology level: current
Classification: ISIC rev.4 ecoinvent: 0729:Mining of other non-ferrous metal ores
Synonyms: REE; REO
Scenario: Business-as-Usual
System model: Substitution, consequential, long-term
Generated by: Efstathios Kakkos
Database: ecoinvent
isCopyrightProtected: true

## General comment
This dataset refers to the extraction and refining processes applied on the produced REO concentrate, 50% beneficiated (as a byproduct of the mining and beneficiation activities in Bayan obo mines) in order to produce high purity individual lanthanum oxide, cerium oxide, neodymium oxide and a mixed samarium-europium gadolinium concentrate. The extraction and refining activities take place in a processing facility in the Baotou region of Inner Mongolia and include acid roasting, water leaching and chloride conversion, solvent extraction and calcination.

Background: Metals are produced as part of a complex, highly interconnected and interdependent system, with many desirable but scarce/critical metals recovered as by-products during the production of one or more ‘host’ metal(s). Iron is one of the world’s major mineral commodities and is mined from heterogeneous mineral deposits in countries worldwide. In various deposits in China, iron co-occurs with minerals containing rare earth elements, particularly bastnäsite and/or monazite. Through the separation and processing of these minerals, rare earth oxides are produced.
Modelling approach: This dataset was created using the critical materials life cycle assessment tool (CMLCAT) of Arshi et al. (2018).

## Included activities start
The activity starts with the processing of the 50% concentrated rare earth oxides from beneficiation.

## Included activities end
The activities end with the production of individual rare earth oxides.

## Allocation
No allocation is applied.

## Geography
Baotou is known as the rare earth capital of China. The mined ore from the Bayan Obo mines (located also in the Baotou region) is transported to the Baotou's rare earth processing facilities, which are located approximately 150 km south of Bayan Obo mines, where the majority of RE metals are produced as a byproduct of iron ore mining. Bayan Obo and Baotou are connected both by rail and road. Baotou is home to rare earth processing facilities and iron and steel refin-eries and for the production of various RE products such as carbonates, oxides, chlorides and different alloy products. The five rare earth separation and refining facilities have a total capacity of 73,500 tonnes per year.

## Technology
At first, the 50% REO concentrate undergoes acid roasting, where it is heated to 550 °C with the addition of 93% sulfuric acid to produce rare earth sulfates (approximatelly 50% RE sulfate present). In the following water leaching & chlorine conversion process, the produced RE sulfates are leached and converted to 92% mixed RE chlorides, with a conversion efficiency of 97%. Afterwards, solvent extraction is applied to the mixed RE chlo-rides by mixing them with an organic extractant such as di(2-ethylhexyl) phosphoric acid, with the small differences in basicity of the different RE metals serving as the driving agent of the separation process. The products of the solvent extraction process are aqueous solutions of individual RE ions high purity (99%). The generated RE ions are then precipitated in the aqueous solutions to produce RE carbonates. Calcination of the RE carbonates at 750−800 °C with natural gas as the heat source is the final step to form the individual REOs (lanthanum oxide, cerium oxide, neodymium oxide and a mixed samarium-europium gadolinium concentrate).

## Time period
Data are considered representative of current production practices.

## Reference product
- lanthanum oxide: 1 kg; name La2O3; By-product classification allocatable product; CPC 3429: Compounds of rare earth metals, of yttrium or of scandium; CAS 1312-81-8
  production volume 2.16e6 kg
    The production volume is expressed in kg. Its calculation is based on the fact that for the production of 0.5 kg of cerium oxide from monazite - bastnasite mineral, 0.27 kg of lanthanum oxide is produced as a coproduct. The annual production of cerium oxide is 4000000 kg (see cerium oxide PV comment).
  property lanthanum content 0.85268; name La2O3_La_content
    lanthanum content on a dry matter basis
  property oxygen content 0.14732; name La2O3_O_content
    oxygen content on a dry matter basis
  property price 6.82 EUR2005
    Temporary price data. Calculated as 90% of purchasers price based on: 2005 import and export prices (total trades (USD) divided by total weight (kg) in biggest economies of the world: EU27, USA, Brasil, China, India, Japan and Russia) from UN Commodity Trade Statistics Database (http://data.un.org/Explorer.aspxDatabase [Accessed 2011.06.20]). Commodity: Rare-earth metals, scandium and yttrium
  properties: carbon allocation 0 kg, carbon content 0, carbon content, fossil 0, carbon content, non-fossil 0, dry mass 1 kg, water content 0, water in wet mass 0 kg, wet mass 1 kg

## Inputs from technosphere
- DTPA, diethylenetriaminepentaacetic acid: 0.0208186 kg; = 0.01500896*CeO2/0.95+0.01500896*La2O3/0.95+0.01500896*Nd2O3/0.95+0.01500896*SmEuGd/0.95; lognormal variance with pedigree 0.003225, pedigree (2,1,3,2,1)
  Value taken from the critical materials life cycle assessment tool (CMLCAT) of Arshi et al. (2018), provided by F. Zhao from Purdue university (more information on the sampling procedure) and adjusted to correspond to the production of 0.5 kg cerium oxide, 0.27 kg of lanthanum oxide, 0.16 kg of neodynium oxide and 0.02 kg of samarium-europium-gadolinium oxide. Proxy for D2EHPA.
  properties: carbon content, fossil 0.427481, dry mass 1 kg, heating value, net 12.95 MJ, wet mass 1 kg
- ammonium bicarbonate: 0.331795 kg; = 0.23920352*CeO2/0.95+0.23920352*La2O3/0.95+0.23920352*Nd2O3/0.95+0.23920352*SmEuGd/0.95; lognormal variance with pedigree 0.003225, pedigree (2,1,3,2,1)
  Value taken from the critical materials life cycle assessment tool (CMLCAT) of Arshi et al. (2018), provided by F. Zhao from Purdue university (more information on the sampling procedure) and adjusted to correspond to the production of 0.5 kg cerium oxide, 0.27 kg of lanthanum oxide, 0.16 kg of neodynium oxide and 0.02 kg of samarium-europium-gadolinium oxide.
  properties: carbon content, fossil 0.151899, dry mass 1 kg, heating value, net 12.27 MJ, wet mass 1 kg
- barium hydroxide: 0.10655 kg; = 0.076816256*CeO2/0.95+0.076816256*La2O3/0.95+0.076816256*Nd2O3/0.95+0.076816256*SmEuGd/0.95; lognormal variance with pedigree 0.003225, pedigree (2,1,3,2,1)
  (same comment as for ammonium bicarbonate)
- chemical factory, organics: 9.57086e-9 unit; = 6.90E-09*CeO2/0.95+6.90E-09*La2O3/0.95+6.90E-09*Nd2O3/0.95+6.90E-09*SmEuGd/0.95; lognormal variance with pedigree 0.332625, pedigree (2,1,3,2,1)
  Input assumed for completeness purposes. Value taken from the existing dataset ''rare earth oxides production from bastnäsite concentrate'' from the 3.6 version of the Ecoinvent database.
- electricity, medium voltage: 1.20131 kWh; = 0.866068888888888*CeO2/0.95+0.866068888888888*La2O3/0.95+0.866068888888888*Nd2O3/0.95+0.866068888888888*SmEuGd/0.95; lognormal variance with pedigree 0.003225, pedigree (2,1,3,2,1)
  (same comment as for ammonium bicarbonate)
- esters of versatic acid: 0.000590586 kg; = 0.000425776*CeO2/0.95+0.000425776*La2O3/0.95+0.000425776*Nd2O3/0.95+0.000425776*SmEuGd/0.95; lognormal variance with pedigree 0.003225, pedigree (2,1,3,2,1)
  Value taken from the critical materials life cycle assessment tool (CMLCAT) of Arshi et al. (2018), provided by F. Zhao from Purdue university (more information on the sampling procedure) and adjusted to correspond to the production of 0.5 kg cerium oxide, 0.27 kg of lanthanum oxide, 0.16 kg of neodynium oxide and 0.02 kg of samarium-europium-gadolinium oxide. Proxy for napthenic acid
  properties: carbon content, fossil 0.727273, dry mass 1 kg, heating value, net 22.04 MJ, wet mass 1 kg
- fatty alcohol: 0.000590586 kg; = 0.000425776*CeO2/0.95+0.000425776*La2O3/0.95+0.000425776*Nd2O3/0.95+0.000425776*SmEuGd/0.95; lognormal variance with pedigree 0.003225, pedigree (2,1,3,2,1)
  Value taken from the critical materials life cycle assessment tool (CMLCAT) of Arshi et al. (2018), provided by F. Zhao from Purdue university (more information on the sampling procedure) and adjusted to correspond to the production of 0.5 kg cerium oxide, 0.27 kg of lanthanum oxide, 0.16 kg of neodynium oxide and 0.02 kg of samarium-europium-gadolinium oxide. Proxy for 2-ethylhexanol.
  properties: carbon content, fossil 0.0408973, carbon content, non-fossil 0.743434, dry mass 1 kg, heating value, net 41.01 MJ, wet mass 1 kg
- hazardous waste, for underground deposit: -4.33729e-6 kg; = 0.00000312691888*CeO2/0.95+0.00000312691888*La2O3/0.95+0.00000312691888*Nd2O3/0.95+0.00000312691888*SmEuGd/0.95; lognormal variance with pedigree 0.001225, pedigree (2,1,1,2,1)
  (same comment as for ammonium bicarbonate)
  production volume
    The production volume is expressed in kg. Its calculation is based on the fact that for the production of 0.5 kg of cerium oxide from monazite - bastnasite mineral, 0.00000312691888 kg of hazardous waste, for underground deposit is produced as a byproduct. The annual production of cerium oxide is 4000000 kg (see cerium oxide PV comment).
  properties: carbon content, fossil 0.55467, dry mass 1 kg, wet mass 1 kg
- heat, district or industrial, other than natural gas: 35.3698 MJ; = 25.4994383217868*CeO2/0.95+25.4994383217868*La2O3/0.95+25.4994383217868*Nd2O3/0.95+25.4994383217868*SmEuGd/0.95; lognormal variance with pedigree 0.003225, pedigree (2,1,3,2,1)
  Value taken from the critical materials life cycle assessment tool (CMLCAT) of Arshi et al. (2018), provided by F. Zhao from Purdue university (more information on the sampling procedure) and adjusted to correspond to the production of 0.5 kg cerium oxide, 0.27 kg of lanthanum oxide, 0.16 kg of neodynium oxide, 0.05 kg of praseodymium oxide and 0.02 kg of samarium-europium-gadolinium oxide.
  properties: heating value, net 1 MJ
- hydrochloric acid, without water, in 30% solution state: 3.06225 kg; = 2.2076907299501*CeO2/0.95+2.2076907299501*La2O3/0.95+2.2076907299501*Nd2O3/0.95+2.2076907299501*SmEuGd/0.95; lognormal variance with pedigree 0.003225, pedigree (2,1,3,2,1)
  8.89E-01 kg of hydrochloric acid consumption stems from the water leaching and chlorine conversion process and the rest (1.32E+00 kg) from the solvent extraction process. All values taken from the critical materials life cycle assessment tool (CMLCAT) of Arshi et al. (2018), provided by F. Zhao from Purdue university (more information on the sampling procedure) and adjusted to correspond to the production of 0.5 kg cerium oxide, 0.27 kg of lanthanum oxide, 0.16 kg of neodynium oxide, 0.05 kg of praseodymium oxide and 0.02 kg of samarium-europium-gadolinium oxide.
  properties: dry mass 1 kg, heating value, net 3.32 MJ, wet mass 1 kg
- hydrogen fluoride: -0.253488 kg; = 0.18274940165048*CeO2/0.95+0.18274940165048*La2O3/0.95+0.18274940165048*Nd2O3/0.95+0.18274940165048*SmEuGd/0.95; lognormal variance with pedigree 0.001225, pedigree (2,1,1,2,1)
  (same comment as for ammonium bicarbonate)
  production volume
    The production volume is expressed in kg. Its calculation is based on the fact that for the production of 0.5 kg of cerium oxide from monazite - bastnasite mineral, 0.18274940165048 kg of hydrogen fluoride is produced as a byproduct. The annual production of cerium oxide is 4000000 kg (see cerium oxide PV comment).
  properties: dry mass 1 kg, heating value, net 6.06 MJ, price 2 EUR2005, wet mass 1 kg
- kerosene: 0.047314 kg; = 0.034110496*CeO2/0.95+0.034110496*La2O3/0.95+0.034110496*Nd2O3/0.95+0.034110496*SmEuGd/0.95; lognormal variance with pedigree 0.003225, pedigree (2,1,3,2,1)
  Value taken from the critical materials life cycle assessment tool (CMLCAT) of Arshi et al. (2018), provided by F. Zhao from Purdue university (more information on the sampling procedure) and adjusted to correspond to the production of 0.5 kg cerium oxide, 0.27 kg of lanthanum oxide, 0.16 kg of neodynium oxide and 0.02 kg of samarium-europium-gadolinium oxide. Proxy for sulfonated kerosene.
  properties: carbon content, fossil 0.85, dry mass 1 kg, heating value, net 43 MJ, wet mass 1 kg
- magnesium oxide: 0.675966 kg; = 0.487329811123561*CeO2/0.95+0.487329811123561*La2O3/0.95+0.487329811123561*Nd2O3/0.95+0.487329811123561*SmEuGd/0.95; lognormal variance with pedigree 0.003225, pedigree (2,1,3,2,1)
  (same comment as for ammonium bicarbonate)
  properties: dry mass 1 kg, wet mass 1 kg
- magnesium sulfate: -2.28815 kg; = 1.64961840445358*CeO2/0.95+1.64961840445358*La2O3/0.95+1.64961840445358*Nd2O3/0.95+1.64961840445358*SmEuGd/0.95; lognormal variance with pedigree 0.001225, pedigree (2,1,1,2,1)
  (same comment as for ammonium bicarbonate)
  production volume
    The production volume is expressed in kg. Its calculation is based on the fact that for the production of 0.5 kg of cerium oxide from monazite - bastnasite mineral, 1.64961840445358 kg of magnesium sulfate is produced as a byproduct. The annual production of cerium oxide is 4000000 kg (see cerium oxide PV comment).
  properties: dry mass 1 kg, price 0.22 EUR2005, wet mass 1 kg
- municipal solid waste: -0.0193096 kg; = 0.013921053904*CeO2/0.95+0.013921053904*La2O3/0.95+0.013921053904*Nd2O3/0.95+0.013921053904*SmEuGd/0.95; lognormal variance with pedigree 0.001225, pedigree (2,1,1,2,1)
  (same comment as for ammonium bicarbonate)
  production volume
    The production volume is expressed in kg. Its calculation is based on the fact that for the production of 0.5 kg of cerium oxide from monazite - bastnasite mineral, 0.013921053904 kg of municipal solid waste is produced as a byproduct. The annual production of cerium oxide is 4000000 kg (see cerium oxide PV comment).
  properties: carbon content, fossil 0.17155, carbon content, non-fossil 0.26165, dry mass 0.771 kg, heating value, net 11.74 MJ, water content 0.29702, wet mass 1 kg
  note on heating value, net: Value taken from the general comment of the treatment dataset.
- natural gas, high pressure: 2.03051 m3; = 1.463872*CeO2/0.95+1.463872*La2O3/0.95+1.463872*Nd2O3/0.95+1.463872*SmEuGd/0.95; lognormal variance with pedigree 0.003225, pedigree (2,1,3,2,1)
  (same comment as for heat, district or industrial, other than natural gas)
  properties: carbon content, fossil 0.602381, dry mass 0.84 kg, heating value, net 36 MJ, wet mass 0.84 kg
  note on carbon content, fossil: An average C content of 0.506 kg C/ m3 has been assumed (this average has been calculated using data in Tab 3.5, ecoinvent v2.2 report 6_V
  note on heating value, net: Literature value, Source: Christoph Meili;Niels Jungbluth;Maresa Bussa (2021) Life cycle inventories of crude oil and natural gas extraction. ESU-services Ltd. commissioned by BAFU & VSG, Schaffhausen, Switzerland, http://esu-services.ch/data/public-lci-reports/
- natural gas, unprocessed, at extraction: 1.87811 m3; = 1.354*CeO2/0.95+1.354*La2O3/0.95+1.354*Nd2O3/0.95+1.354*SmEuGd/0.95; lognormal variance with pedigree 0.003225, pedigree (2,1,3,2,1)
  (same comment as for heat, district or industrial, other than natural gas)
  properties: carbon content, fossil 0.602381, dry mass 0.84 kg, heating value, net 36 MJ, wet mass 0.84 kg
- praseodymium oxide: -0.0693541 kg; = 0.05*CeO2/0.95+0.05*La2O3/0.95+0.05*Nd2O3/0.95+0.05*SmEuGd/0.95; lognormal variance with pedigree 0.001225, pedigree (2,1,1,2,1)
  (same comment as for ammonium bicarbonate)
  production volume
    The production volume is expressed in kg. Its calculation is based on the fact that for the production of 0.5 kg of cerium oxide from monazite - bastnasite mineral, 0.05 kg of praseodymium oxide is produced as a byproduct. The annual production of cerium oxide is 4000000 kg (see cerium oxide PV comment).
  properties: dry mass 1 kg, price 10.7 EUR2005, wet mass 1 kg
- rare earth oxide concentrate, 50% REO: 3.37984 kg; = 2.43665899822618*CeO2/0.95+2.43665899822618*La2O3/0.95+2.43665899822618*Nd2O3/0.95+2.43665899822618*SmEuGd/0.95; lognormal variance with pedigree 0.003225, pedigree (2,1,3,2,1)
  (same comment as for ammonium bicarbonate)
  properties: cerium content 0.25, dry mass 1 kg, europium content 0.00295, gadolinium content 0.00117, lanthanum content 0.135, neodymium content 0.08, praseodymium content 0.025, samarium content 0.00588, wet mass 1 kg
  note on cerium content: The calculation of the rare earth element (REE) content of the hydroxide concentrate is based on the facts the concentrate contains 50% REE and that the per kg production of refined RE oxides from the monazite and bastnäsite mineral contains 0.5 kg cerium oxide, 0.27 kg lanthanum oxide, 0.16 kg neodymium oxide, 0.05 kg of praseodymium oxide and 0.02 kg of mixed samarium-europium-gadolinium concentrate.
- soda ash, dense: 0.644088 kg; = 0.464347888*CeO2/0.95+0.464347888*La2O3/0.95+0.464347888*Nd2O3/0.95+0.464347888*SmEuGd/0.95; lognormal variance with pedigree 0.003225, pedigree (2,1,3,2,1)
  (same comment as for ammonium bicarbonate)
  properties: carbon content, fossil 0.113208, dry mass 1 kg, heating value, net 3.43 MJ, wet mass 1 kg
- soda ash, light: 0.644088 kg; = 0.464347888*CeO2/0.95+0.464347888*La2O3/0.95+0.464347888*Nd2O3/0.95+0.464347888*SmEuGd/0.95; lognormal variance with pedigree 0.003225, pedigree (2,1,3,2,1)
  (same comment as for ammonium bicarbonate)
  properties: carbon content, fossil 0.0517241, dry mass 1 kg, heating value, net 3.43 MJ, wet mass 1 kg
- sodium hydroxide, without water, in 50% solution state: 1.23608 kg; = 0.8911392*CeO2/0.95+0.8911392*La2O3/0.95+0.8911392*Nd2O3/0.95+0.8911392*SmEuGd/0.95; lognormal variance with pedigree 0.003225, pedigree (2,1,3,2,1)
  (same comment as for ammonium bicarbonate)
  properties: dry mass 1 kg, heating value, net 3.03 MJ, wet mass 1 kg
- spent solvent mixture: -4.16124 kg; = 3*CeO2/0.95+3*La2O3/0.95+3*Nd2O3/0.95+3*SmEuGd/0.95; lognormal variance with pedigree 0.001225, pedigree (2,1,1,2,1)
  Value calculated from simplified mass balance and assumed here for completeness purposes. The value was not con-tained originally in the critical materials life cycle assessment tool (CMLCAT) of Arshi et al. (2018), provided by F. Zhao from Purdue university.
  production volume
    The production volume is expressed in kg. Its calculation is based on the fact that for the production of 0.5 kg of cerium oxide from monazite - bastnasite mineral, 3 kg of spent solvent mixture is produced as a byproduct. The annual production of cerium oxide is 4000000 kg (see cerium oxide PV comment).
  properties: carbon content, fossil 0.32235, dry mass 0.835 kg, heating value, net 21.7 MJ, water content 0.197605, wet mass 1 kg
  note on carbon content, fossil: Tab A.7, ecoinvent v2.2 report 13_I. C content has been calculated after data in the tables, and then referred to 1 kg DM
- sulfidic tailings, generic: -8.05894 kg; = 5.81E+00*CeO2/0.95+5.81E+00*La2O3/0.95+5.81E+00*Nd2O3/0.95+5.81E+00*SmEuGd/0.95; lognormal variance with pedigree 0.001225, pedigree (2,1,1,2,1)
  (same comment as for spent solvent mixture)
  production volume
    The production volume is expressed in kg. Its calculation is based on the fact that for the production of 0.5 kg of cerium oxide from monazite - bastnasite mineral, 5.8105 kg of sulfidic tailings is produced as a byproduct. The annual production of cerium oxide is 4000000 kg (see cerium oxide PV comment).
  properties: aluminium content 0.014738, calcium content 0.0045972, carbon content, fossil 0.0087785, dry mass 0.7 kg, iron content 0.015374, magnesium content 0.0022359, oxygen content 0.89157, potassium content 0.0025181, silicon content 0.053273, sodium content 0.0014472, water content 0.42857, wet mass 1 kg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
- sulfuric acid: 3.4576 kg; = 2.49271519898001*CeO2/0.95+2.49271519898001*La2O3/0.95+2.49271519898001*Nd2O3/0.95+2.49271519898001*SmEuGd/0.95; lognormal variance with pedigree 0.003225, pedigree (2,1,3,2,1)
  (same comment as for ammonium bicarbonate)
  properties: dry mass 1 kg, wet mass 1 kg
- transport, freight train: 0.349542 metric ton*km; = 0.689464286*(2.436658998/1000)*150; lognormal variance with pedigree 0.122625, pedigree (2,1,3,2,1)
  The assumed distance from the Bayan Obo mine to the processing facility in Baotou is assumed to be 150 km (see geography comment). Only transport of the concentrate to the facility is considered here. The values contained in CMLCAT tool were not taken into account. Since the Bayan Obo mine is connected with Baotou by road and by rail tracks, the default transport mix (68.9464% train and the rest by lorry) is considered here (consult the ''market for rare earth oxide concentrate, 50% REO'' dataset).
- transport, freight, lorry 16-32 metric ton, EURO5: 0.157434 metric ton*km; = (1-0.689464286)*(2.436658998/1000)*150; lognormal variance with pedigree 0.122625, pedigree (2,1,3,2,1)
  (same comment as for transport, freight train)
- trimethylamine: 0.00082919 kg; = 0.0005977952*CeO2/0.95+0.0005977952*La2O3/0.95+0.0005977952*Nd2O3/0.95+0.0005977952*SmEuGd/0.95; lognormal variance with pedigree 0.003225, pedigree (2,1,3,2,1)
  Value taken from the critical materials life cycle assessment tool (CMLCAT) of Arshi et al. (2018), provided by F. Zhao from Purdue university (more information on the sampling procedure) and adjusted to correspond to the production of 0.5 kg cerium oxide, 0.27 kg of lanthanum oxide, 0.16 kg of neodynium oxide and 0.02 kg of samarium-europium-gadolinium oxide. Proxy for Alamine 336.
  properties: carbon content, fossil 0.610169, dry mass 1 kg, heating value, net 36.92 MJ, wet mass 1 kg
- wastewater, average: -0.0548358 m3; = 0.039533237*CeO2/0.95+0.039533237*La2O3/0.95+0.039533237*Nd2O3/0.95+0.039533237*SmEuGd/0.95; lognormal variance with pedigree 0.001225, pedigree (2,1,1,2,1)
  (same comment as for spent solvent mixture)
  production volume
    The production volume is expressed in m3. Its calculation is based on the fact that for the production of 0.5 kg of cerium oxide from monazite - bastnasite mineral, 0.039533 m3 of wastewater is produced as a byproduct. The annual production of cerium oxide is 4000000 kg (see cerium oxide PV comment).
  properties: carbon content, non-fossil 0.194039, dry mass 0.346837 kg, water content 2882.2, wet mass 1000 kg
  note on carbon content, non-fossil: 0.0673 kg TOC/m3 (Tab A.17, ecoinvent v2.2 report 13_I). TOC was considered as Total Carbon.

## Inputs from nature
- Water, unspecified natural origin [natural resource, in water]: 0.0579321 m3; = 0.0417654644891712*CeO2/0.95+0.0417654644891712*La2O3/0.95+0.0417654644891712*Nd2O3/0.95+0.0417654644891712*SmEuGd/0.95; lognormal variance with pedigree 0.003225, pedigree (2,1,3,2,1)
  1.34E-02 m3 of water consumption stems from the water leaching and chlorine conversion process and the rest (2.84E-03 m3) from the solvent extraction process. All values taken from the critical materials life cycle assessment tool (CMLCAT) of Arshi et al. (2018), provided by F. Zhao from Purdue university (more information on the sampling procedure) and adjusted to correspond to the production of 0.5 kg cerium oxide, 0.27 kg of lanthanum oxide, 0.16 kg of neodynium oxide, 0.05 kg of praseodymium oxide and 0.02 kg of samarium-europium-gadolinium oxide.

## Emissions to nature
- Carbon dioxide, fossil [air, non-urban air or from high stacks]: 3.70854 kg; = 2.6736312*CeO2/0.95+2.6736312*La2O3/0.95+2.6736312*Nd2O3/0.95+2.6736312*SmEuGd/0.95; lognormal variance with pedigree 0.003225, pedigree (2,1,3,2,1)
  (same comment as for ammonium bicarbonate)
- Hydrochloric acid [air, non-urban air or from high stacks]: 2.92019e-5 kg; = 2.10527390620562E-05*CeO2/0.95+2.10527390620562E-05*La2O3/0.95+2.10527390620562E-05*Nd2O3/0.95+2.10527390620562E-05*SmEuGd/0.95; lognormal variance with pedigree 0.042625, pedigree (2,1,3,2,1)
  (same comment as for ammonium bicarbonate)
- Hydrogen fluoride [air, non-urban air or from high stacks]: 6.69209e-6 kg; = 4.82458272700428E-06*CeO2/0.95+4.82458272700428E-06*La2O3/0.95+4.82458272700428E-06*Nd2O3/0.95+4.82458272700428E-06*SmEuGd/0.95; lognormal variance with pedigree 0.042625, pedigree (2,1,3,2,1)
  (same comment as for ammonium bicarbonate)
- Nitrogen oxides [air, non-urban air or from high stacks]: 0.00311055 kg; = 0.00224251643922392*CeO2/0.95+0.00224251643922392*La2O3/0.95+0.00224251643922392*Nd2O3/0.95+0.00224251643922392*SmEuGd/0.95; lognormal variance with pedigree 0.042625, pedigree (2,1,3,2,1)
  Exchange has been calculated to represent the amount of the subdivided dataset. 5.12E-05 kg of Nitrogen oxides emissions stem from the acid roasting process and the rest (2.19E-03 kg) from the solvent extraction process. All values taken from the critical materials life cycle assessment tool (CMLCAT) of Arshi et al. (2018), provided by F. Zhao from Purdue university (more information on the sampling procedure) and adjusted to correspond to the production of 0.5 kg cerium oxide, 0.27 kg of lanthanum oxide, 0.16 kg of neodynium oxide and 0.02 kg of samarium-europium-gadolinium oxide.
- Particulate Matter, > 10 um [air, non-urban air or from high stacks]: 0.000302432 kg; = 0.000218034533816539*CeO2/0.95+0.000218034533816539*La2O3/0.95+0.000218034533816539*Nd2O3/0.95+0.000218034533816539*SmEuGd/0.95; lognormal variance with pedigree 0.042625, pedigree (2,1,3,2,1)
  (same comment as for ammonium bicarbonate)
- Sulfur dioxide [air, non-urban air or from high stacks]: 0.000139544 kg; = 0.000100602626087901*CeO2/0.95+0.000100602626087901*La2O3/0.95+0.000100602626087901*Nd2O3/0.95+0.000100602626087901*SmEuGd/0.95; lognormal variance with pedigree 0.003225, pedigree (2,1,3,2,1)
  8.77E-05 kg of Sulphur dioxide emissions stem from the acid roasting process and the rest (1.29E-05 kg) from the solvent extraction process. All values taken from the critical materials life cycle assessment tool (CMLCAT) of Arshi et al. (2018), provided by F. Zhao from Purdue university (more information on the sampling procedure) and adjusted to correspond to the production of 0.5 kg cerium oxide, 0.27 kg of lanthanum oxide, 0.16 kg of neodynium oxide, 0.05 kg of praseodymium oxide and 0.02 kg of samarium-europium-gadolinium oxide.
- Sulfuric acid [air, non-urban air or from high stacks]: 3.44744e-6 kg; = 2.48539039826026E-06*CeO2/0.95+2.48539039826026E-06*La2O3/0.95+2.48539039826026E-06*Nd2O3/0.95+2.48539039826026E-06*SmEuGd/0.95; lognormal variance with pedigree 0.042625, pedigree (2,1,3,2,1)
  (same comment as for ammonium bicarbonate)
- BOD5, Biological Oxygen Demand [water, unspecified]: 0.000416381 kg; name BOD; = 0.000300184896*CeO2/0.95+0.000300184896*La2O3/0.95+0.000300184896*Nd2O3/0.95+0.000300184896*SmEuGd/0.95; lognormal variance with pedigree 0.042625, pedigree (2,1,3,2,1)
  (same comment as for ammonium bicarbonate)
- COD, Chemical Oxygen Demand [water, unspecified]: 0.000693966 kg; name COD; = 0.000500306736*CeO2/0.95+0.000500306736*La2O3/0.95+0.000500306736*Nd2O3/0.95+0.000500306736*SmEuGd/0.95; lognormal variance with pedigree 0.042625, pedigree (2,1,3,2,1)
  (same comment as for ammonium bicarbonate)
- DOC, Dissolved Organic Carbon [water, unspecified]: 0.000257024 kg; name DOC; = 0.000185298791111111*CeO2/0.95+0.000185298791111111*La2O3/0.95+0.000185298791111111*Nd2O3/0.95+0.000185298791111111*SmEuGd/0.95; lognormal variance with pedigree 0.042625, pedigree (2,1,3,2,1)
  Mathematical relation based on section 5.9.7 of the data quality guideline for the ecoinvent. (DOC = TOC). The value was not contained originally in the critical materials life cycle assessment tool (CMLCAT) of Arshi et al. (2018), provided by F. Zhao from Purdue university.
- Nitrogen [water, unspecified]: 5.72523e-5 kg; = 0.000041275352*CeO2/0.95+0.000041275352*La2O3/0.95+0.000041275352*Nd2O3/0.95+0.000041275352*SmEuGd/0.95; lognormal variance with pedigree 0.042625, pedigree (2,1,3,2,1)
  (same comment as for ammonium bicarbonate)
- Suspended solids, unspecified [water, unspecified]: 0.000248086 kg; = 0.0001788544*CeO2/0.95+0.0001788544*La2O3/0.95+0.0001788544*Nd2O3/0.95+0.0001788544*SmEuGd/0.95; lognormal variance with pedigree 0.042625, pedigree (2,1,3,2,1)
  (same comment as for ammonium bicarbonate)
- TOC, Total Organic Carbon [water, unspecified]: 0.000257024 kg; name TOC; = 0.000185298791111111*CeO2/0.95+0.000185298791111111*La2O3/0.95+0.000185298791111111*Nd2O3/0.95+0.000185298791111111*SmEuGd/0.95; lognormal variance with pedigree 0.042625, pedigree (2,1,3,2,1)
  Mathematical relation based on section 5.9.7 of the data quality guideline for the ecoinvent. (TOC = COD /2.7). The value was not contained originally in the critical materials life cycle assessment tool (CMLCAT) of Arshi et al. (2018), provided by F. Zhao from Purdue university.

## Sampling procedure
This dataset is based on the following publication: Arshi, P. S., Vahidi, E., & Zhao, F. (2018). Behind the Scenes of Clean Energy: The Environmental Footprint of Rare Earth Products. ACS Sustainable Chemistry & Engineering, 6(3), 3311-3320. doi:10.1021/acssuschemeng.7b03484.
All exchanges from/ to the environment and from/to the technosphere were calculated using the critical materials life cycle assessment tool (CMLCAT) of Arshi et al. (2018), provided by F. Zhao from Purdue university. This excel-based software acts as a supporting tool to the abovementioned publication. Individual exchanges such as sulfidic tailings and wastewater which were not contained in the original datasets have been added for completness purposes and their calculation is explained analytically in the comment section of each exchange.
