# hexafluoroethane production, from fluorination of tetrafluoroethane

Dataset: EcoSpold 2, unit process
Geography: GLO
Time period: 1998-01-01 to 2022-12-31
Technology level: current
Classification: EcoSpold01Categories: chemicals/inorganics
Classification: ISIC rev.4 ecoinvent: 2011:Manufacture of basic chemicals
Synonyms: C2F6; fc-116; fluorocarbon 116; r-116; perfluoroethane; halocarbon 116; 1,1,1,2-tetrafluoro-
Scenario: Business-as-Usual
System model: Substitution, consequential, long-term
Generated by: Sofia Parada Tur
Published in: Ohno et al. 1998
Database: ecoinvent
isCopyrightProtected: true

## General comment
Production of hexafluoroethane by means of the fluorination of tetrafluoroethane The reaction yield is 95% based on literature. Infrastructure, energy and cooling water inputs are estimated due to lack of data. The system includes the process with consumption of raw materials, energy, and infrastructure. Since the emissions are of chemicals of some toxicity, and due to lack of process data, they are assumed to be recycled internally and have been not considered in the emissions.

## Included activities start
From the reception of tetrafluoroethane and fluorine at the factory gate.

## Included activities end
This activity ends with the production of hexafluoroethane including materials, energy uses, infrastructure and emissions.

## Geography
the chemical reaction is valid in the global context

## Technology
The present inventory describes the process of producing hexafluoroethane which comprises reacting a hydrofluorocarbon (tetrafluoroethane) containing 2 carbon atoms, with fluorine gas at an elevated temperature (200-500°C) in a vapor phase (0 to 3 MPa) in the presence of a diluent gas. The diluent gas preferably comprises at least one of tetrafluoromethane, hexafluroroethane and hydrogen fluoride, and is preferably rich in hydrogen fluoride. This reaction is also possible with pentafluoroethane, but tetrafluoroethane is preferable. The reaction is the following: CF3CH2F + 2F2 = CF3CF3 + 2HF

## Time period
Year of publication of patent

## Parameters
- fraction, cooling water, cooling pond system, to air: 0.032 dimensionless; name fraction_CW_CP_to_air; lognormal variance with pedigree 0.0413, pedigree (2,3,1,3,1)
  Calculated based on literature value (Scown, C.D., 2011, Water Footprint of U.S. Transportation Fuels and supplying information of the article) (Vionnet, S., Quantis Water Database - Technical Report, 2012).
- fraction, cooling water, once-through system, to air: 0.004 dimensionless; name fraction_CW_OT_to_air; lognormal variance with pedigree 0.0413, pedigree (2,3,1,3,1)
  (same comment as for fraction, cooling water, cooling pond system, to air)
- fraction, cooling water, recirculating system, to air: 0.771 dimensionless; name fraction_CW_R_to_air; lognormal variance with pedigree 0.0413, pedigree (2,3,1,3,1)
  (same comment as for fraction, cooling water, cooling pond system, to air)
- fraction, cooling water, to air: 0.3875 dimensionless; name fraction_CW_to_air; = (0.5*fraction_CW_OT_to_air)+(0.5*fraction_CW_R_to_air); lognormal variance with pedigree 0.092025, pedigree (4,4,3,2,4)
  Calculated value based on literature value (see comments of the other parametres present in this dataset) and expert opinion. In the case when no industry/literature data are available about the type of cooling or directly fraction, cooling water, to air specific for the process a default assumption is applied. It is assumed that the once-through cooling system is used in 50% of all cases and recirculating system is used in another 50% of all cases.

## Reference product
- hexafluoroethane: 1 kg; name hexafluoroethane_output; By-product classification allocatable product; CPC 34110: Hydrocarbons and their halogenated, sulphonated, nitrated or nitrosated derivatives; CAS 76-16-4
  production volume 132820 kg
    In the EU the reported sales for C2F6 in 2007 is 87 tonnes (see source). CEFIC gives an average growth rate in the chemical production (including pharmaceuticals) of 4.1% annually. The production volume is calculated for the reference year 2005. The world production volume is then calculated with the GDP ratio (GDPwolrd/GDP EU), in units current US$ (World Bank). The ratio is 3.32. It is estimated, that 50% of the production volume is from this technology.
  property heating value, net 5.27 MJ
    LHV is calculated based on the elemental composition of the substance. Based on the CAS number of the substance (000076-16-4), the chemical formula of the substance is found to be: C2F6, (PubChem 2020).
    Reference: Kim, S., Chen, J., Cheng, T., Gindulyte, A., He, J., He, S., Li, Q., Shoemaker, B. A., Thiessen, P. A., Yu, B., Zaslavsky, L., Zhang, J., & Bolton, E. E. (2019). PubChem 2019 update: improved access to chemical data. Nucleic acids research, 47(D1), D1102–D1109. https://doi.org/10.1093/nar/gky1033
  property molecular weight 138 g/mol; name hexafluoroethane_output_MW; = 2*12+6*19
    based on molecular weight
  property price 3.39 EUR2005
    Temporary price data. Calculated as 90% of purchasers price based on: 2005 import and export prices (total trades (USD) divided by total weight (kg) in biggest economies of the world: EU27, USA, Brasil, China, India, Japan and Russia) from UN Commodity Trade Statistics Database (http://data.un.org/Explorer.aspxDatabase [Accessed 2011.06.20]). Commodity: Fluor-/brom-/iodin-ated derivs of acyclic hydrocarbon
  properties: carbon allocation 0.173913 kg, carbon content 0.173913, carbon content, fossil 0.173913, carbon content, non-fossil 0, dry mass 1 kg, water content 0, water in wet mass 0 kg, wet mass 1 kg

## Inputs from technosphere
- chemical factory, organics: 4e-10 unit; = 4E-10* hexafluoroethane_output; source Gendorf 2000; lognormal variance with pedigree 0.0833, pedigree (2,4,5,3,4)
  The value is approximated from the chemical plant sites in Gendorf (Germany) and from the BASF site of Ludwigshafen (Germany). On the Gendorf site 12 companies produce 1500 different end products with a total amount 1.25 Mt each year and in the BASF site 9.1 Mt per year. The production in both sites cover many different (mainly organic) chemical processes. The plant lifetime is considered 50 years and the production capacity 50,000 tones per year.
- electricity, medium voltage: 0.333 kWh; = 0.333* hexafluoroethane_output; source Gendorf 2000; lognormal variance with pedigree 0.1706, pedigree (4,4,5,1,5)
  values for electricity and heat have been approximated with data from a large chemical site in Germany producing 2.05Mt/y (intermediates included) of different chemicals. This plant uses 3.2MJ per kg of product. All energy needed for heat or steam is assumed to be natural gas. Of the total energy input, it is assumed 2 MJ/kg as heat and 1.2 MJ/kg as electricity.
  Uncertainty: Chauvel 1989
- fluorine, liquid: 0.388062, 0.191648 kg (2 suppliers, which the file names only by identifier); sum of these 0.57971 kg; = 1/ 138*2* fluorine_input_MW*(1/0.95); lognormal variance with pedigree 0.0518, pedigree (2,5,5,5,2)
  based on stoichiometric reaction and molar weights. The reaction yield is assumed 95%
  properties: dry mass 1 kg, molecular weight 38 g/mol, wet mass 1 kg
- heat, district or industrial, natural gas: 2 MJ; = 2* hexafluoroethane_output; source Gendorf 2000; lognormal variance with pedigree 0.0819, pedigree (2,3,5,3,4)
  values for electricity and heat have been approximated with data from a large chemical site in Germany producing 2.05Mt/y (intermediates included) of different chemicals. This plant uses 3.2MJ per kg of product. All energy needed for heat or steam is assumed to be natural gas. Of the total energy input, it is assumed 2 MJ/kg as heat and 1.2 MJ/kg as electricity.
  properties: heating value, net 1 MJ
- hydrogen fluoride: -0.0743218, -0.215533 kg (2 suppliers, which the file names only by identifier); sum of these -0.289855 kg; = 1/ 138*2* HF_output_mol_weight; lognormal variance with pedigree 0.0492, pedigree (2,5,1,1,4)
  based on stoichiometric reaction and molar weights. The reaction yield is 95%.
  production volume
    Calculated from production volume of reference product using the relative outputs.
  properties: dry mass 1 kg, heating value, net 6.06 MJ, molecular weight 20 g/mol, price 2 EUR2005, wet mass 1 kg
- refrigerant R134a: 0.778032 kg; name r134a_input; = 1/ 138* r134a_input_mol_mass*(1/0.95); lognormal variance with pedigree 0.0413, pedigree (2,2,5,1,1)
  based on stoichiometric reaction and molar weights. The reaction yield is assumed 95%
  property molecular weight 102 g/mol; name r134a_input_mol_mass; = 2*12+2*1+4*19
  properties: carbon content, fossil 0.235294, dry mass 1 kg, heating value, net 9.51 MJ, wet mass 1 kg

## Inputs from nature
- Water, cooling, unspecified natural origin [natural resource, in water]: 0.024 m3; name water_cooling_UNO_input; = 0.024* hexafluoroethane_output; source Gendorf 2000; lognormal variance with pedigree 0.1706, pedigree (4,4,5,1,5)
  The value is approximated with data from a large chemical plant site in Germany producing 2.05 Mt/y (intermediates included) of different chemicals. In this plant in total an average 24 kg water per kg of product are used.
  Uncertainty: Chauvel 1989

## Emissions to nature
- Water [air, unspecified]: 0.0093 m3; name water_to_air_unspecified; = water_cooling_UNO_input*fraction_CW_to_air; lognormal variance with pedigree 0.130025, pedigree (4,4,5,2,4)
  Calculated value based on literature values and expert opinion. See comments in the parametres' comment field.
  property fraction, origin: fresh water 0; name fraction_origin_fresh_water
  property fraction, origin: salt water 0; name fraction_origin_salt_water
  property fraction, origin: unspecified 1; name fraction_origin_unspecified
- Water [water, unspecified]: 0.0147 m3; name water_to_water_unspecified; = water_cooling_UNO_input*(1-fraction_CW_to_air); lognormal variance with pedigree 0.130025, pedigree (4,4,5,2,4)
  (same comment as for Water)
  property fraction, origin: fresh water 0; name fraction_origin_fresh_water_Ww
  property fraction, origin: salt water 0; name fraction_origin_salt_water_Ww
  property fraction, origin: unspecified 1; name fraction_origin_unspecified_Ww

## Sampling procedure
This dataset is an estimation based on literature data and basic principles of chemical engineering.

## Review by Bo Weidema 2012-02-29
This dataset has been reviewed by two editors: Eric Johnson and Bo Weidema.

## Review by Bo Weidema 2012-02-29
Passed.
Reviewed for relevance of dataset structure, exchanges and quality of documentation and readability
