# dysprosium oxide to generic market for mischmetal

Dataset: EcoSpold 2, unit process
Geography: GLO
Time period: 2020-01-01 to 2022-12-31
Technology level: current
Classification: ISIC rev.4 ecoinvent: 0729:Mining of other non-ferrous metal ores
Scenario: Business-as-Usual
System model: Substitution, consequential, long-term
Generated by: Johannes Müller
Database: ecoinvent
isCopyrightProtected: true

## General comment
This is a renaming activity. It's purpose is to link 'dysprosium oxide' to the generic 'market for mischmetal'.

## Included activities start
Activity starts with the reception of 'dysprosium oxide'.

## Included activities end
Activity ends with the 'mischmetal' being ready for transportation.

## Geography
dataset represents the global situation

## Time period
based on reference year of production volume

## Reference product
- dysprosium oxide: 1 kg; By-product classification allocatable product; CPC 34290: Compounds of rare earth metals, of yttrium or of scandium; CAS 1308-87-8; lognormal variance with pedigree 0.216, pedigree (5,5,5,5,5)
  production volume 1 kg
  properties: carbon allocation 0 kg, carbon content 0, carbon content, fossil 0, carbon content, non-fossil 0, dry mass 1 kg, dysprosium content 0.871318, oxygen content 0.128682, price 0 EUR2005, water content 0, water in wet mass 0 kg, wet mass 1 kg

## Inputs from technosphere
- mischmetal: 1 kg
  production volume
    Assuming that approximately 35,000 tonnes and 132,000 tonnes of mischmetal and REOs are, respectively, produced globally each year (Myers, 2009; Gambogi, 2019), we estimated that approximately 27% of REO production is in the form of mischmetal. The amount of dysprosium oxide that is used in mischmetal production was therefore calculated as 0.27 multiplied by the sum of dysprosium oxide production globally that is represented in the database, i.e. approximately 1289000 tonnes. Sources: Myers, H. P. (2009). Introductory Solid State Physics (Second Edition). Taylor & Francis, Philadelphia, PA, US; Gambogi, J. (2019). 2016 Minerals Yearbook - Rare Earths [Advance Release]. US Geological Survey, Reston, VA, US.
  properties: dry mass 1 kg, price 619.06 EUR2005, wet mass 1 kg
