# soda production, solvay process

Dataset: EcoSpold 2, unit process
Geography: RoW
Time period: 1999-01-01 to 2022-12-31
Technology level: current
Classification: ISIC rev.4 ecoinvent: 2011:Manufacture of basic chemicals
Synonyms: Calcined soda; Washing soda; Disodium carbonate; SODIUM CARBONATE; 497-19-8; Soda Ash
Scenario: Business-as-Usual
System model: Substitution, consequential, long-term
Generated by: Maggie Osses
Published in: Althaus H.-J. 2007
Database: ecoinvent
isCopyrightProtected: true

## General comment
This dataset represents the production of soda ash (sodium carbonate, Na2CO3), calcium chloride (CaCl2) and sodium bicarbonate (NaHCO3) by means of the Solvay process.
Soda is primarily used in the glass industry as raw material for the decomposition of sand. Another important use of soda is in the chemical industry for the production of chemicals. In the detergent and soap industry, soda ash is used for the manufacture of detergents and for the saponification of grease. Also the paper and cellulose industry uses soda for the digestion, the neutralization, the cleaning and the leaching as well as for the recycling of wastepaper.
Calcium chloride is most widely used for its de-icing and dust control abilities. It is primarily used for the de-icing of roads. For this application, calcium chloride is used in the form of flakes with at least 77 wt% calcium chloride. There are no special requirements on the purity of the product for this application. Other areas of application of calcium chloride include road stabilisation and dust control, industrial processing, oil and gas well fluids, and concrete production.
Sodium bicarbonate is used in a number of industries, it is used in cooking, commonly reffered to as baking soda, as a neutralising agent and in the medical industry.
This dataset is based on literature data, mainly from a German report on the best available techniques (BAT) for soda production. The production of sodium bicarbonate has been introduced in a second step to the dataset. The solvay process can produce a number or by-products, among which sodium bicarbonate. The main production route of sodium bicarbonate is the Solvay process, followed by the other commercially available process, Trona ore mining. The dataset has been adjusted accordingly, knowing that 2 moles of sodium bicarbonate are needed to produce 1 mol of soda, threfore the dataset has been modified based on the Solvay process step: 2NaHCO3 --(heat)--> Na2CO3 + H2O + CO2 (CO2 is recirculated in the process).
References:
Althaus H.-J., Chudacoff M., Hischier R., Jungbluth N., Osses M. and Primas A. (2007) Life Cycle Inventories of Chemicals. ecoinvent report No. 8, v2.0. EMPA Dübendorf, Swiss Centre for Life Cycle Inventories, Dübendorf, CH.

## Included activities start
The activity starts when the raw materials enter the process.

## Included activities end
This activity ends with the production of soda, sodium bicarbonate and calcium chloride. The dataset includes the consumption of raw materials, auxiliaries, energy, infrastructure and land use. The system also includes the generation of wastes and emissions into air and water. The production of light soda is considered; the process to obtain heavy soda from light soda is not included.

## Geography
Data are from measurements at European manufacturing plants or estimations considering the European situation. They are assumed to be representative of the global production.

## Technology
Data from Finnish and German literature source refer apparently to state-of-the-art manufacturing plants.
The manufacture of soda with the Solvay technique is carried out by the conversion of sodium chloride (salt) and calcium carbonate (limestone) according to the following overall equation:
2NaCl + CaCO3 → CaCl2 + Na2CO3
Soda ash is manufactured in two grades: ”light ash“ and ”heavy ash“, the difference being the much greater volume occupied by a given mass of light ash. Heavy ash, when transported in bulk, has a pouring density equal to or slightly above that of water, whereas the pouring density of light ash is only half of this value. Heavy ash is clearly the preferred form for economic transportation over long distances. For general chemicals production, light ash is widely used because of its traditionally lower price, its higher rate of dissolution and reaction, and its freedom from calcium ions, which are unacceptable in certain processes, as for example in soap manufacture.

## Time period
Most of the data correspond to measurements performed in 1999. The other sources do not mention the time when the data were obtained.

## Parameters
- fraction, cooling water, cooling pond system, to air: 0.032 dimensionless; name fraction_CW_CP_to_air; lognormal variance with pedigree 0.0413, pedigree (2,3,1,3,1)
  Calculated based on literature value (Scown, C.D., 2011, Water Footprint of U.S. Transportation Fuels and supplying information of the article) (Vionnet, S., Quantis Water Database - Technical Report, 2012).
- fraction, cooling water, once-through system, to air: 0.004 dimensionless; name fraction_CW_OT_to_air; lognormal variance with pedigree 0.0413, pedigree (2,3,1,3,1)
  (same comment as for fraction, cooling water, cooling pond system, to air)
- fraction, cooling water, recirculating system, to air: 0.771 dimensionless; name fraction_CW_R_to_air; lognormal variance with pedigree 0.0413, pedigree (2,3,1,3,1)
  (same comment as for fraction, cooling water, cooling pond system, to air)
- fraction, cooling water, to air: 0.3875 dimensionless; name fraction_CW_to_air; = (0.5*fraction_CW_OT_to_air)+(0.5*fraction_CW_R_to_air); lognormal variance with pedigree 0.092025, pedigree (4,4,3,2,4)
  Calculated value based on literature value (see comments of the other parametres present in this dataset) and expert opinion. In the case when no industry/literature data are available about the type of cooling or directly fraction, cooling water, to air specific for the process a default assumption is applied. It is assumed that the once-through cooling system is used in 50% of all cases and recirculating system is used in another 50% of all cases.
- fraction, process water, to air: 0.205 dimensionless; name fraction_PW_to_air; lognormal variance with pedigree 0.092025, pedigree (4,4,3,2,4)
  Literature value (Statistics Canada, 2007 & Shaffer, K.H., 2008, Consumptive water use in the Great Lakes Basin, USGS) (Vionnet, S., Quantis Water Database - Technical Report, 2012).

## Reference product
- soda ash, light: 1 kg; name RP; By-product classification allocatable product; CPC 34240: Phosphates of triammonium; salts and peroxysalts of inorganic acids and metals n.e.c.; CAS 497-19-8
  Soda is primarily used in the glass industry as raw material for the decomposition of sand. Another important use of soda is in the chemical industry for the production of chemicals. In the detergent and soap industry, soda ash is used for the manufacture of detergents and for the saponification of grease. Also the paper and cellulose industry uses soda for the digestion, the neutralization, the cleaning and the leaching as well as for the recycling of wastepaper.
  production volume 6.03944e10 kg
    Global production except USA, Africa and output from Hou's process. Source: http://minerals.usgs.gov/minerals/pubs/commodity/soda_ash/myb1-2007-sodaa.xls table 7, downloaded 20 April 2009; multiplied by 286.14/106 to account for water content
  property heating value, net 3.43 MJ
    LHV is calculated based on the elemental composition of the substance. Based on the CAS number of the substance (000497-19-8), the chemical formula of the substance is found to be: CNa2O3, (PubChem 2020).
    Reference: Kim, S., Chen, J., Cheng, T., Gindulyte, A., He, J., He, S., Li, Q., Shoemaker, B. A., Thiessen, P. A., Yu, B., Zaslavsky, L., Zhang, J., & Bolton, E. E. (2019). PubChem 2019 update: improved access to chemical data. Nucleic acids research, 47(D1), D1102–D1109. https://doi.org/10.1093/nar/gky1033
  property price 0.0827 EUR2005
    Calculated from literature (USGS, http://minerals.usgs.gov/minerals/pubs/commodity/soda_ash/myb1-2006-sodaa.pdf, accessed 20150806).
  properties: carbon allocation 0.11322 kg, carbon content 0.11322, carbon content, fossil 0.11322, carbon content, non-fossil 0, dry mass 1 kg, water content 0, water in wet mass 0 kg, wet mass 1 kg

## Inputs from technosphere
- ammonia, anhydrous, liquid: 5.92697e-5, 1.2059e-5, 0.000115055, 0.000443189, 5.3908e-5, 3.56985e-5, 0.00127531, 0.000117434 kg (8 suppliers, which the file names only by identifier); sum of these 0.00211192 kg; lognormal variance with pedigree 0.0846, pedigree (3,3,5,5,1)
  Calculated on values for loss during the process. numbers for loss taken from data from survey in literature (KCL 2002)
  Uncertainty: c
  properties: dry mass 1 kg, wet mass 1 kg
- calcium chloride: -1.10876 kg; name BP_calcium_chloride; lognormal variance with pedigree 0.2106, pedigree (5,5,5,5,5)
  Calcium chloride is the most common by-product of the Solvay process.
  production volume
    Calculated from the production volume of soda ash, light, crystalline, heptahydrate in proportion to the respective output amounts.
  properties: dry mass 1 kg, price 0.126 EUR2005, wet mass 1 kg
- chemical factory, organics: 8.65887e-10 unit; lognormal variance with pedigree 0.3498, pedigree (2,3,5,4,3)
  Calculated based on literature data published by the industry. For this activity, no information was readily available concerning infrastructure and land-use. Therefore, the infrastructure is estimated based on data from two chemical factories, the BASF site of Ludwigshafen and the chemical factory in Gendorf (which are both located in Germany), which produce a wide range of chemical substances. Based on this data, the following assumptions are made: the built area amounts to about 4.2 ha, the plant has an average output of 50'000 t/a and a lifespan of fifty years. The estimated infrastructure amount is therefore 4.00 E-10 units per kg of produced chemical.
  References:
  Althaus H.-J., Chudacoff M., Hischier R., Jungbluth N., Osses M. and Primas A. (2007) Life Cycle Inventories of Chemicals. ecoinvent report No. 8, v2.0. EMPA Dübendorf, Swiss Centre for Life Cycle Inventories, Dübendorf, CH.
  Gendorf (2000) Umwelterklärung 2000, Werk Gendorf. Werk Gendorf, Burgkirchen.
- electricity, medium voltage: 0.00402524, 0.00278864, 0.00014947, 0.0332109, 0.000150605, 0.00191349 kWh (6 suppliers, which the file names only by identifier); sum of these 0.0422384 kWh; lognormal variance with pedigree 0.0846, pedigree (3,3,5,5,1)
  Data from survey in literature (KCL 2002)
  Uncertainty: d
- heat, district or industrial, other than natural gas: 7.61074, 0.0132897 MJ (2 suppliers, which the file names only by identifier); sum of these 7.62403 MJ; lognormal variance with pedigree 0.0846, pedigree (3,3,5,5,1)
  Data from survey in literature (KCL 2002)
  Uncertainty: d
  properties: heating value, net 1 MJ
- inert waste, for final disposal: -0.26399 kg; name BP_inert_waste_for_final_disposal; lognormal variance with pedigree 0.108, pedigree (4,5,5,5,1)
  Data from survey in literature (Woode 1995)
  Uncertainty: d
  production volume
    (same comment as for calcium chloride)
  properties: dry mass 0.995 kg, water content 0.00502513, wet mass 1 kg
- lime, packed: 1.26715 kg; lognormal variance with pedigree 0.0526, pedigree (1,3,5,5,1)
  Data from survey in literature (UBA 2001 and KCL 2002)
  Uncertainty: d
  properties: carbon content, fossil 0.117492, dry mass 0.998 kg, water content 0.00200401, wet mass 1 kg
  note on carbon content, fossil: Table 3.1, ecoinvent v2.2 report 7, part VII, pg 3. MW CaCO3=100, MW MgCO3=84
- sodium bicarbonate: -0.0887076 kg; name NaHCO3; lognormal variance with pedigree 0.2106, pedigree (5,5,5,5,5)
  This dataset is based on literature data, mainly from a German report on the best available techniques (BAT) for soda production. The production of sodium bicarbonate has been introduced in a second step to the dataset. The solvay process can produce a number or by-products, among which sodium bicarboante. The main production route of sodium bicarbonate is the Solvay process, followed by the other commercially available process, Trona ore mining. The dataset has been adjusted accordingly, knowing that 2 moles of sodium bicarbonate are needed to produce 1 mol of soad, threfore the dataset has been modified based on the Solvay process step: 2NaHCO3 --(heat)--> Na2CO3 + H2O + CO2 (CO2 is recirculated in the process).
  production volume
    Calculated from production volume of reference product using the relative outputs.
  property carbon content, non-fossil 0.012011; name NaHCO3_C_content_non_fossil
  properties: dry mass 1 kg, heating value, net 5.77 MJ, price 0.24 EUR2005, wet mass 1 kg
- sodium chloride, brine solution: 1.58394 kg; lognormal variance with pedigree 0.1006, pedigree (4,3,5,5,1)
  Data from survey in literature (Thieme 1993 and KCL 2002). The principal raw materials required for the manufacture of soda are sodium chloride, limestone (calcium carbonate), ammonia, water and air.
  Uncertainty: d
  properties: dry mass 1 kg, wet mass 1 kg

## Inputs from nature
- Water, cooling, unspecified natural origin [natural resource, in water]: 0.108777 m3; name water_cooling_UNO_input; source IPPC - Integrated Pollution Prevention a 2007; lognormal variance with pedigree 0.0527, pedigree (2,2,5,5,1)
  The principal raw materials required for the manufacture of soda are sodium chloride, limestone (calcium
  carbonate), ammonia, water and air.
  property carbon content, fossil 0.0104329; name C_content_fossil
  property carbon content, non-fossil 0; name C_content_non_fossil
  property dry mass 0.1101 kg; name DM
  property water content 9081.65; name water_content
  property water in wet mass 999.89 kg; name WWM
- Water, unspecified natural origin [natural resource, in water]: 0.00332857 m3; name water_UNO_input; source IPPC - Integrated Pollution Prevention a 2007; lognormal variance with pedigree 0.0546, pedigree (3,3,5,5,1)
  Data from survey in literature (UBA 2001)
  Calculated based on literature, (Vionnet, S., Quantis Water Database - Technical Report, 2012).
  Uncertainty: d

## Emissions to nature
- Ammonia [air, urban air close to ground]: 0.00211192 kg; lognormal variance with pedigree 0.1246, pedigree (3,3,5,5,1)
  Data from survey in literature (KCL 2002)
  Uncertainty: d
- Water [air, unspecified]: 0.0428335 m3; = (water_cooling_UNO_input*fraction_CW_to_air)+(water_UNO_input*fraction_PW_to_air); lognormal variance with pedigree 0.0827, pedigree (2,2,5,5,1)
  Calculated as a fraction of the input of water. For more details, refer to the mathematical relation and the parameters.
  property fraction, origin: fresh water 0; name fraction_origin_fresh_water
  property fraction, origin: salt water 0; name fraction_origin_salt_water
  property fraction, origin: unspecified 1; name fraction_origin_unspecified
- Cadmium II [water, surface water]: 1.82681e-7 kg; lognormal variance with pedigree 0.6926, pedigree (1,3,5,5,1)
  Data from survey in literature (UBA 2001)
  Uncertainty: d
- Calcium II [water, surface water]: 0.105596 kg; lognormal variance with pedigree 0.0826, pedigree (1,3,5,5,1)
  Data from survey in literature (UBA 2001)
  Uncertainty: d
- Chloride [water, surface water]: 0.25343 kg; lognormal variance with pedigree 0.0826, pedigree (1,3,5,5,1)
  Data from survey in literature (UBA 2001)
  Uncertainty: d
- Copper ion [water, surface water]: 1.74233e-6 kg; lognormal variance with pedigree 0.0826, pedigree (1,3,5,5,1)
  Data from survey in literature (UBA 2001)
  Uncertainty: d
- Lead II [water, surface water]: 1.57338e-5 kg; lognormal variance with pedigree 0.6926, pedigree (1,3,5,5,1)
  Data from survey in literature (UBA 2001)
  Uncertainty: d
- Mercury II [water, surface water]: 1.84793e-9 kg; lognormal variance with pedigree 0.6926, pedigree (1,3,5,5,1)
  Data from survey in literature (UBA 2001)
  Uncertainty: d
- Nickel II [water, surface water]: 1.21435e-6 kg; lognormal variance with pedigree 0.6926, pedigree (1,3,5,5,1)
  Data from survey in literature (UBA 2001)
  Uncertainty: d
- Nitrogen [water, surface water]: 0.000195353 kg; lognormal variance with pedigree 0.0826, pedigree (1,3,5,5,1)
  Data from survey in literature (UBA 2001)
  Uncertainty: d
- Phosphorus [water, surface water]: 5.50155e-5 kg; lognormal variance with pedigree 0.0826, pedigree (1,3,5,5,1)
  Data from survey in literature (UBA 2001)
  Uncertainty: d
- Solids, inorganic [water, surface water]: 0.104857 kg; lognormal variance with pedigree 0.0826, pedigree (1,3,5,5,1)
  Data from survey in literature (UBA 2001)
  Uncertainty: d
- Water [water, unspecified]: 0.0692722 m3; = water_cooling_UNO_input*(1-fraction_CW_to_air)+water_UNO_input*(1-fraction_PW_to_air); lognormal variance with pedigree 0.0827, pedigree (2,2,5,5,1)
  (same comment as for Water)
  property fraction, origin: fresh water 0; name fraction_origin_fresh_water_Ww
  property fraction, origin: salt water 0; name fraction_origin_salt_water_Ww
  property fraction, origin: unspecified 1; name fraction_origin_unspecified_Ww

## Sampling procedure
Most data are from a German study based on measurements in two German plants. A Finnish study is based on data from one plant, but no background information about the data is available.

## Extrapolations
This dataset has been copied from an original dataset covering the geography RER. The uncertainty has been adjusted accordingly.

## Review by Gregor Wernet 2017-08-04
This dataset was additionally reviewed in a separate review process by Eric Johnson of Atlantic Consulting as well as Emilia Moreno Ruiz and Gregor Wernet of ecoinvent.
