# ethanol production from whey

Dataset: EcoSpold 2, unit process
Geography: CH
Time period: 2000-01-01 to 2022-12-31
Technology level: current
Classification: EcoSpold01Categories: biomass/production
Classification: ISIC rev.4 ecoinvent: 2011:Manufacture of basic chemicals
Scenario: Business-as-Usual
System model: Substitution, consequential, long-term
Share of production covered: 0 %
Generated by: trainee ecoinvent
Published in: Jungbluth N. 2007
Database: ecoinvent
isCopyrightProtected: true

## General comment
The multioutput-process 'whey, to fermentation' delivers the co-products Ethanol, 95% in H20, from whey', 'yeast paste from whey', and 'portein concentrate rom whey'. The allocation is based on economic criteria. The production of ethanol from whey is of no economical importance in the world.
[This dataset is meant to replace the following datasets:
- treatment of whey by fermentation, CH, 2000 - 2004]

## Included activities end
Fermentation of whey including materials, energy uses, infrastructure, and emissions.

## Geography
The inventory is modelled with data from a plant in Ireland.

## Technology
Production of ethanol from whey with the Carbery process.

## Parameters
- fraction, cooling water, cooling pond system, to air: 0.032 dimensionless; name fraction_CW_CP_to_air; lognormal variance with pedigree 0.0413, pedigree (2,3,1,3,1)
  Calculated based on literature value (Scown, C.D., 2011, Water Footprint of U.S. Transportation Fuels and supplying information of the article) (Vionnet, S., Quantis Water Database - Technical Report, 2012).
- fraction, cooling water, once-through system, to air: 0.004 dimensionless; name fraction_CW_OT_to_air; lognormal variance with pedigree 0.0413, pedigree (2,3,1,3,1)
  (same comment as for fraction, cooling water, cooling pond system, to air)
- fraction, cooling water, recirculating system, to air: 0.771 dimensionless; name fraction_CW_R_to_air; lognormal variance with pedigree 0.0413, pedigree (2,3,1,3,1)
  (same comment as for fraction, cooling water, cooling pond system, to air)
- fraction, cooling water, to air: 0.64 dimensionless; name fraction_CW_to_air; lognormal variance with pedigree 0.092025, pedigree (4,4,3,2,4)
  Calculated value based on literature value (Schonoor, 2008) (Vionnet, S., Quantis Water Database - Technical Report, 2012).
- fraction, process water, to air: 0.205 dimensionless; name fraction_PW_to_air; lognormal variance with pedigree 0.092025, pedigree (4,4,3,2,4)
  Literature value (Statistics Canada, 2007 & Shaffer, K.H., 2008, Consumptive water use in the Great Lakes Basin, USGS) (Vionnet, S., Quantis Water Database - Technical Report, 2012).
- fraction, tap water, to air: 0.205 dimensionless; name fraction_TW_to_air; = fraction_PW_to_air; lognormal variance with pedigree 0.092025, pedigree (4,4,3,2,4)
  Calculated value. See comment in the other parametres present in this dataset. Tap water is considered to be always used as process water, thus process water fractions to air are applied to all tap water input flows to calculate the amount of water consumed in the processes.

## Reference product
- ethanol, without water, in 95% solution state, from fermentation: 1 kg; name RP_amount_1; By-product classification allocatable product; CPC 35491: Biodiesel; CAS 64-17-5
  production volume 89573.7 kg
    Calculated production volume (PV) based on knowledge of the regional production volumes. The PV of the regional activity has been extrapolated using the nominal GDP of 2005 (source: United Nations, <http://data.un.org/Glossary.aspx?q=GDP+%28current+US%24%29>, accessed 20130726 and 20130312).
    1.0642E+07 kg is the production volume of the corresponding GLO activity.
  property heating value, net 28.1 MJ
    Based on literature, page 275, Report 17: Jungbluth, N., Chudacoff, M., Dauriat, A., Dinkel, F., Doka, G., Faist Emmenegger, M., Gnansounou, E., Kljun, N., Schleiss, K., Spielmann, M., Stettler, C., Sutter, J. 2007: Life Cycle Inventories of Bioenergy. ecoinvent report No. 17, Swiss Centre for Life Cycle Inventories, Dübendorf, CH.
  property price 0.324 EUR2005
    Temporary price data. Calculated as 90% of purchasers price based on: 2005 prices from FAPRI2007, 2009. Agricultural outlook. (http://www.fapri.missouri.edu/outreach/publications/ag_outlook.asp?current_page=outreach; accessed 22/06/10). Unit conversion from US gallon to kg - 1 gallon = 3.7856 liter * 0.789 kg/liter (ethanol density) = 2.9868 kg
  properties: carbon allocation 0.521739 kg, carbon content 0.521739, carbon content, fossil 0, carbon content, non-fossil 0.521739, dry mass 1 kg, water content 0, water in wet mass 0 kg, wet mass 1 kg

## Inputs from technosphere
- electricity, medium voltage: 0.416924 kWh; lognormal variance with pedigree 0.0401, pedigree (1,1,5,3,1)
  Eners 2005
  Eners 2005
- ethanol fermentation plant: 6.10765e-10 unit; lognormal variance with pedigree 0.3626, pedigree (2,4,5,5,3)
  Estimation
  This exchange has an activity link directly to the producing activity because the product is primarily consumed in the same geographical area where it is produced.
- fodder yeast: -1.14402 kg; name BP_amount_2
  production volume
    The world production of ethanol from whey was 6.8 Million litres per year.
    Calculated from the production volume of whey in proportion to the respective output amounts.
  properties: carbon content, non-fossil 0.51763, dry mass 0.92 kg, price 1.42 EUR2005, water content 0.0869565, wet mass 1 kg
  note on carbon content, non-fossil: considered pure protein (ecoinvent v2.2 report 17, pg 288). C-content in protein is estimated to be 53% ( from 'Evolutionary and Biochemical Aspects', A.D. Kay and T. Vrede (in Global Ecology, 2010, Elsevier B.V., S.E. Jørgensen Ed.). Composition data obtained from Levure fourragère (http://www.feed-alp.admin.ch/start.php?action=adv_search&cmd=list_feed ). First, composition data were refered to 1 kg dry mass. Then, C-contents were calculated considering a C-content/dry mass of 46% in carbohydrates (including fibres), 53% in proteins and 75% in fats. All data from 'Evolutionary and Biochemical Aspects', A.D. Kay and T. Vrede (in Global Ecology, 2010, Elsevier B.V., S.E. Jørgensen Ed.). Finally, C-content in kg was multiplied by kg dry mass in the exchange.
- heat, central or small-scale, other than natural gas: 3.85159 MJ; lognormal variance with pedigree 0.04, pedigree (1,1,5,1,1)
  Frometin 2000
  Frometin 2000
  properties: heating value, net 1 MJ
- heat, district or industrial, natural gas: 7.06262 MJ; lognormal variance with pedigree 0.0401, pedigree (1,1,5,3,1)
  Eners 2005
  Eners 2005
  properties: heating value, net 1 MJ
- protein feed, 100% crude: -5.92728 kg; name BP_amount_1
  production volume
    Calculated from production volume of reference product using the relative outputs. The world production of ethanol from whey was 6.8 Million litres per year.
    Calculated from the production volume of whey in proportion to the respective output amounts.
  properties: carbon content, non-fossil 0.53, dry mass 1 kg, price 0.424 EUR2005, wet mass 1 kg
  note on carbon content, non-fossil: considered pure protein (ecoinvent v2.2 report 17, pg 288). C-content in protein is estimated to be 53% ( from 'Evolutionary and Biochemical Aspects', A.D. Kay and T. Vrede (in Global Ecology, 2010, Elsevier B.V., S.E. Jørgensen Ed.).
- soda ash, light: 0.0457109 kg; lognormal variance with pedigree 0.0401, pedigree (1,1,5,3,1)
  Eners 2005
  Eners 2005
  properties: carbon content, fossil 0.0517241, dry mass 1 kg, heating value, net 3.43 MJ, wet mass 1 kg
- sodium phosphate: 0.00581026 kg; lognormal variance with pedigree 0.040025, pedigree (1,1,5,2,1)
  Eners 2005
  Eners 2005
  properties: dry mass 1 kg, wet mass 1 kg
- sodium sulfate, anhydrite: 0.00222005 kg; lognormal variance with pedigree 0.0401, pedigree (1,1,5,3,1)
  Eners 2005
  Eners 2005
  properties: dry mass 1 kg, wet mass 1 kg
- sulfuric acid: 0.0253302 kg; lognormal variance with pedigree 0.0401, pedigree (1,1,5,3,1)
  Eners 2005
  Eners 2005
  properties: dry mass 1 kg, wet mass 1 kg
- tap water: 6.70986 kg; name tap_water_input; lognormal variance with pedigree 0.0401, pedigree (1,1,5,3,1)
  Eners 2005
  Eners 2005
  properties: carbon content, fossil 0.00178991, dry mass 0.000337476 kg, water content 2962.17, wet mass 1 kg
  note on carbon content, fossil: Bicarbonate content is 2.93 mol/m3. CO2 content is 0.1 mol/m3 (ecoinvent v2.2 report 8, Tab 93.1).
- whey: 57.0809 kg
  Eners 2005
  properties: carbon content, non-fossil 0.340757, dry mass 0.064 kg, water content 14.625, wet mass 1 kg

## Inputs from nature
- Water, cooling, unspecified natural origin [natural resource, in water]: 0.00143616 m3; name water_cooling_UNO_input; lognormal variance with pedigree 0.0401, pedigree (1,1,5,3,1)
  Eners 2005

## Emissions to nature
- Carbon dioxide, non-fossil [air, urban air close to ground]: 2.87322 kg; lognormal variance with pedigree 0.0401, pedigree (1,1,5,3,1)
  Calculated from the carbon balance
- Water [air, unspecified]: 0.00229466 m3; name water_to_air_unspecified; = (tap_water_input/1000*fraction_TW_to_air)+(water_cooling_UNO_input*fraction_CW_to_air); lognormal variance with pedigree 0.0807, pedigree (2,2,5,1,1)
  Calculated value based on literature values and expert opinion. See comments in the parametres' comment field.
- BOD5, Biological Oxygen Demand [water, surface water]: 0.0450009 kg; lognormal variance with pedigree 0.0981, pedigree (1,2,5,1,3)
  Calculated from the water emissions
- COD, Chemical Oxygen Demand [water, surface water]: 0.0450009 kg; lognormal variance with pedigree 0.0981, pedigree (1,2,5,1,3)
  Calculated from the water emissions
- DOC, Dissolved Organic Carbon [water, surface water]: 0.0180005 kg; lognormal variance with pedigree 0.0901, pedigree (3,5,5,3,1)
  Extrapolation for sum parameter
- TOC, Total Organic Carbon [water, surface water]: 0.0180005 kg; lognormal variance with pedigree 0.0981, pedigree (1,2,5,1,3)
  Calculated from the water emissions
- Water [water, unspecified]: 0.00585135 m3; name water_to_water_unspecified; = (tap_water_input/1000)*(1-fraction_TW_to_air)+water_cooling_UNO_input*(1-fraction_CW_to_air); lognormal variance with pedigree 0.0807, pedigree (2,2,5,1,1)
  (same comment as for Water)
  property carbon content, fossil 0; name C_content_fossil
  property carbon content, non-fossil 0; name C_content_non_fossil
  property water in wet mass 1000 kg; name WWM

## Sampling procedure
Literature data

## Extrapolations
Some data are derived from other or unknown plants or have been estimated.
