# vinyl fluoride production

Dataset: EcoSpold 2, unit process
Geography: RoW
Time period: 2005-01-01 to 2022-12-31
Technology level: current
Classification: EcoSpold01Categories: chemicals/organics
Classification: ISIC rev.4 ecoinvent: 2011:Manufacture of basic chemicals
Synonyms: Ethylene, fluoro-; Vinyl fluoride, inhibited; UN 1860; Fluoroethylene; Vinyl fluoride; Fluoroethene; 1-Fluoroethylene; Monofluoroethylene; C2H3F
Scenario: Business-as-Usual
System model: Substitution, consequential, long-term
Share of production covered: 50 %
Generated by: Niels Jungbluth
Published in: Jungbluth, N. 2007
Database: ecoinvent
isCopyrightProtected: true

## General comment
Basic inventory based on cumulative data.

## Included activities end
Pre-products, energy use, infrastructure, some air emissions and transports. No full information on all air and water emissions available.

## Geography
Production plant of DuPont in the United States.

## Technology
Fluoropolymer chemistry.

## Time period
Time of publications.

## Reference product
- vinyl fluoride: 1 kg; name RP_amount_1; By-product classification allocatable product; CPC 341: Basic organic chemicals; CAS 75-02-5
  EcoSpold01Location=US
  production volume 4.455e6 kg
    Extrapolated as 4 times the US production. According to Long-Chain Perfluorinated Chemicals (PFCs), Action Plan, U.S. Environmental Protection Agency, 2009, Accessed in http://www.epa.gov/oppt/existingchemicals/pubs/pfcs_action_plan1230_09.pdf the 2011.05.06, the United States accounted for between 25 and 50 percent of the world consumption of fluoropolymers in 2007.
  property heating value, net 23.7 MJ
    LHV is calculated based on the elemental composition of the substance. Based on the CAS number of the substance (000075-02-5), the chemical formula of the substance is found to be: C2H3F, (PubChem 2020).
    Reference: Kim, S., Chen, J., Cheng, T., Gindulyte, A., He, J., He, S., Li, Q., Shoemaker, B. A., Thiessen, P. A., Yu, B., Zaslavsky, L., Zhang, J., & Bolton, E. E. (2019). PubChem 2019 update: improved access to chemical data. Nucleic acids research, 47(D1), D1102–D1109. https://doi.org/10.1093/nar/gky1033
  property price 2.4 EUR2005
    Estimation. Average 2005 prices for EU27, USA, China, Japan and India from Import/Export data (US$ and tonnes) in UN Commodity Trade Statistics Database; Commodity: copolymers of vinyl chloride and vinyl acetate
  properties: carbon allocation 0.521739 kg, carbon content 0.521739, carbon content, fossil 0.521739, carbon content, non-fossil 0, dry mass 1 kg, water content 0, water in wet mass 0 kg, wet mass 1 kg

## Inputs from technosphere
- 1,1-difluoroethane, HFC-152a: 1.5126 kg; lognormal variance with pedigree 0.1226, pedigree (5,3,5,5,1)
  Rough estimation based on cumulative data, Krieger et al. 2006
  EcoSpold01Location=US
  Uncertainty: Rough estimation based on cumulative data, Krieger et al. 2006
  properties: carbon content, fossil 0.363636, dry mass 1 kg, heating value, net 18.36 MJ, wet mass 1 kg
- chemical factory, organics: 4e-10 unit; lognormal variance with pedigree 0.4226, pedigree (5,3,5,5,1)
  EcoSpold01Location=RER
  Rough estimation based on cumulative data, Krieger et al. 2006
  Uncertainty: Rough estimation based on cumulative data, Krieger et al. 2006
- electricity, medium voltage: 0.0528918, 0.00809826, 0.00196403, 0.0540166, 0.436393, 0.00197895, 0.00979435, 0.0251433 kWh (8 suppliers, which the file names only by identifier); sum of these 0.59028 kWh; lognormal variance with pedigree 0.1226, pedigree (5,3,5,5,1)
  EcoSpold01Location=US
  Rough estimation based on cumulative data, Krieger et al. 2006
  Uncertainty: Rough estimation based on cumulative data, Krieger et al. 2006
- heat, district or industrial, natural gas: 6.05625 MJ; lognormal variance with pedigree 0.1226, pedigree (5,3,5,5,1)
  (same comment as for chemical factory, organics)
  properties: heating value, net 1 MJ
- hydrogen fluoride: -0.117351, -0.340319 kg (2 suppliers, which the file names only by identifier); sum of these -0.45767 kg
  production volume
    Calculated from production volume of reference product using the relative outputs.
  properties: dry mass 1 kg, heating value, net 6.06 MJ, price 2 EUR2005, wet mass 1 kg

## Emissions to nature
- Ethane, 1,1-difluoro-, HFC-152a [air, urban air close to ground]: 0.020545 kg; lognormal variance with pedigree 0.1626, pedigree (5,3,5,5,1)
  Rough estimation based on cumulative data, Krieger et al. 2006
  Uncertainty: Rough estimation based on cumulative data, Krieger et al. 2006

## Sampling procedure
Publication of cumulative data.

## Extrapolations
Desaggregation of published cumulative results for global warming potential and cumulative energy demand. This dataset has been copied from an original dataset covering the geography US. The uncertainty has been adjusted accordingly.

## Review by Roberto Dones 2007-09-13
Passed.
none

## Review by Bo Weidema 2012-04-18
Negative input of HF corrected (now recorded as by-product)
