# silver mine operation with extraction

Dataset: EcoSpold 2, unit process
Geography: PE
Time period: 2010-01-01 to 2022-12-31
Technology level: current
Classification: ISIC rev.4 ecoinvent: 0729:Mining of other non-ferrous metal ores
Scenario: Business-as-Usual
System model: Substitution, consequential, long-term
Share of production covered: 11 %
Generated by: Katherine Matos
Database: ecoinvent
isCopyrightProtected: true

## General comment
This dataset describes the exploitation, concentration and smelting of silver. Specific data were used from one peruvian mining operation that has an 11% share of national silver production according to the Peruvian Ministry of energy and mines (2016). The modeled mining unit is a combined silver production with lead and zinc.
The system includes the mining, beneficiation and smelting of the ore, obtaining as a final product silver dore (97% Ag) and concentrates of Pb-Ag and Ag-Zn.
It is important to point out that the largest national production of silver is given by copper companies that have silver as a component in their concentrate.

## Included activities start
The system is modeled from underground ore extraction.

## Included activities end
The activity ends when the precipitate obtained in the Merrill-Crowe process is dried and smelted to finally obtain high-purity silver bars (97% Ag).
The tailing are deposited near the beneficiation plant and water is treated prior to discharge.

## Geography
The data was collected from an underground mine located in the Oyón Province of Oyón, Region of Lima- Perú.

## Technology
The exploitation methods include overhand cut and fill and bench and fill, both mechanized. The ore is transported by rail using locomotives and mining cars to the loading areas and to the concentration plant. The barren material is recirculated as backfill to the pits, and the excess material is transported to the barren material deposit located on the surface.
The metallurgical process consists in two circuits: Circuit 1 consists of primary crushing, milling, and ore flotation, obtaining lead-silver, zinc-silver, and pyrite concentrates; while Circuit 2 consists of primary crushing, milling, and ore flotation, obtaining lead-silver, zinc-silver, and pyrite concentrates. The pyrite concentrates from both circuits are sent to the cyanidation plant. The solution obtained is treated using the Merrill-Crowe process, and the precipitate obtained is dried and smelted to finally obtain high-purity silver bars.

## Time period
This inventory is based on statistical data from the years 2010 onwards. it has been decided to use this year as a starting point because there are no significant changes in production or technology.

## Reference product
- silver, unrefined: 1 kg; name silver_unrefined; source Peruvian Ministry of Energy and Mines  2016; By-product classification allocatable product; CPC 41310: Silver (including silver plated with gold or platinum), unwrought or in semi-manufactured forms, or in powder […]
  Calculation based on Ag production reported by the Peruvian Ministry of Energy and Mines (2016).
  production volume 221001 kg
    Estimation based on the Ag national production reported by the Ministry of Energy an Mines (2016) . It was assumed that the Ag is distributed in the Silver dore (4,9%), Ag-Pb concentrate (68.4%) and Zn-Ag concentrate (3,6%).
  property price 314.627 EUR2005
    Assuming a silver content of 97%, price calculated as 5-year market average (2015-2019; USD/kg; USGS [2020]) of Ag amount and converted to EUR2005 (USD2019/EUR2005 exchange rate: 0.62; Official Data Foundation [2020] and Macrotrends [2020]).
    References:
    Official Data Foundation (2020). Inflation Calculator [Online]. Available from: https://www.officialdata.org/us/inflation/2005?endYear=2019&amount=1 [Accessed 28/07/2020]
    USGS (2020). Mineral Commodity Summaries 2020 [Online]. Available from: https://pubs.usgs.gov/periodicals/mcs2020/mcs2020.pdf [Accessed 28/07/2020]
    Macrotrends (2020). Euro Dollar Exchange Rate (EUR USD) - Historical Chart [Online]. Available from: https://www.macrotrends.net/2548/euro-dollar-exchange-rate-historical-chart [Accessed 28/07/2020]
  properties: carbon allocation 0 kg, carbon content 0, carbon content, fossil 0, carbon content, non-fossil 0, dry mass 1 kg, silver content 0.97, water content 0, water in wet mass 0 kg, wet mass 1 kg

## Inputs from technosphere
- 4-methyl-2-pentanone: 1.52 kg; source SNC-Lavalin Perú S.A. 2014; lognormal variance with pedigree 0.0432, pedigree (3,3,5,1,1)
  Proxy for the 4-methylpentan-2-ol. Literature value, reported on the Environmental Impact Study (2014).
  properties: carbon content, fossil 0.72, dry mass 1 kg, heating value, net 36.32 MJ, wet mass 1 kg
- activated silica: 2.1692 kg; source SNC-Lavalin Perú S.A. 2014; lognormal variance with pedigree 0.0432, pedigree (3,3,5,1,1)
  Proxy for the Diatomita diactiv 12(SiO2). Literature value, reported on the Environmental Impact Study (2014).
  properties: dry mass 1 kg, wet mass 1 kg
- blasting: 65 kg; source SNC-Lavalin Perú S.A. 2014; lognormal variance with pedigree 0.0432, pedigree (3,3,5,1,1)
  ANFO and dinamite used on the underground explotation. Value reported on the Environmental Impact Study (2014) for a operation capacity of 6,000 TMD.
- chemical, organic: 9.24 kg; source Compañia de Minas Buenaventura S.A.A. 2016; lognormal variance with pedigree 0.0432, pedigree (3,3,5,1,1)
  Proxy for the Tupasolato, Sodium di isobutyl dithiophosphinate and the Sodium Isopropyl Xanthate used on the flotation process. Calculated Value based on the information reported on the Environmental Impact Sudy (2014).
  properties: carbon content, fossil 0.628, dry mass 1 kg, heating value, net 19.03 MJ, wet mass 1 kg
  note on carbon content, fossil: This dataset is an unweighted average of 20 organic substances (listed in Tab 88.1, ecoinvent v2.2 report 8, part II), being part of the top100 chemicals included in this database. The C-content has also been calculated as an unweighted average of the C content of the substances composing this dataset.
- copper sulfate: 11.4 kg; source SNC-Lavalin Perú S.A. 2014; lognormal variance with pedigree 0.0052, pedigree (3,3,3,1,1)
  Literature value, based on the available information on the Environmental Impact Sudy (2014).
  properties: dry mass 1 kg, wet mass 1 kg
- diesel, burned in building machine: 3107 MJ; source SNC-Lavalin Perú S.A. 2014; lognormal variance with pedigree 0.0052, pedigree (3,3,3,1,1)
  Calculated value, based on an average consumption of 85,000gl/month reported on the Environmental Impact Study of the Uchucchacua mine(2014).
  properties: heating value, net 1 MJ
- electricity, medium voltage: 5140 kWh; source SNC-Lavalin Perú S.A. 2014; lognormal variance with pedigree 0.0052, pedigree (3,3,3,1,1)
  Calculated value, based on an average consumption of 95.96 Kwh/ton reported on the environmental impact study.
- hydrogen peroxide, without water, in 50% solution state: 155.5 kg; source SNC-Lavalin Perú S.A. 2014; lognormal variance with pedigree 0.0052, pedigree (3,3,3,1,1)
  (same comment as for copper sulfate)
  properties: dry mass 1 kg, heating value, net 7.13 MJ, wet mass 1 kg
- lead concentrate: -3023.9 kg; name ByP_1; source Peruvian Ministry of Energy and Mines  2016; lognormal variance with pedigree 0.0034, pedigree (3,3,2,1,1)
  (same comment as for silver, unrefined)
  production volume
    Calculated from production volume of reference product using the relative outputs.
  property concentration, lead 0 kg/kg; name lead_concentrate_concentration_Pb
  property iron content 0.1665; name ByP_1_Fe_content
  property lead content 0.175; name ByP_1_Pb_content
  property magnesium content 0.1747; name ByP_1_Mg_content
  property silver content 8.36126e-8; name ByP_1_Ag_content
  property zinc content 0.0246; name ByP_1_Zn_content
  properties: dry mass 0.95 kg, price 0.376 EUR2005, water content 0.0526316, wet mass 1 kg
  note on concentration, lead: Calculated based on information from the zinc-lead mine operation dataset.
- lime, packed: 166.7 kg; name Input_2; source SNC-Lavalin Perú S.A. 2014; lognormal variance with pedigree 0.0052, pedigree (3,3,3,1,1)
  (same comment as for copper sulfate)
  properties: carbon content, fossil 0.117492, dry mass 0.998 kg, water content 0.00200401, wet mass 1 kg
- liquefied petroleum gas: 4.74 kg; source SNC-Lavalin Perú S.A. 2014; lognormal variance with pedigree 0.0052, pedigree (3,3,3,1,1)
  (same comment as for copper sulfate)
  properties: carbon content, fossil 0.821863, dry mass 1 kg, heating value, net 45.5 MJ, wet mass 1 kg
  note on heating value, net: Indicative value. Reference: Fuels - Higher and Lower Calorific Values, available at: https://www.engineeringtoolbox.com/fuels-higher-calorific-values-d_169.html
- maize starch: 2.32 kg; name Input_3; source SNC-Lavalin Perú S.A. 2014; lognormal variance with pedigree 0.0432, pedigree (3,3,5,1,1)
  Proxy for the Dextrin H31. Literature value, reported on the Environmental Impact Study (2014).
  property water in wet mass 0.14 kg; name WIM_3
  properties: carbon content, non-fossil 0.46, dry mass 0.86 kg, heating value, net 11.64 MJ, water content 0.162791, wet mass 1 kg
  note on carbon content, non-fossil: C-content of starch is considered 46% on dry mass basis (from 'Evolutionary and Biochemical Aspects', A.D. Kay and T. Vrede (in Global Ecology, 2010, Elsevier B.V., S.E. Jørgensen Ed.)).
- mine infrastructure, gold and silver: 7.15254e-7 unit; source Compañia de Minas Buenaventura S.A.A. 2016; lognormal variance with pedigree 0.3426, pedigree (3,3,5,1,1)
  Calculated value, based on the silver dore bars annual production and life of the mine (42 years).;activityLink introduced to establish a direct link to the corresponding regional supply of this product
- nitric acid, without water, in 50% solution state: 0.11 kg; source SNC-Lavalin Perú S.A. 2014; lognormal variance with pedigree 0.0052, pedigree (3,3,3,1,1)
  (same comment as for copper sulfate)
  properties: dry mass 1 kg, wet mass 1 kg
- polyacrylamide: 4.1 kg; source SNC-Lavalin Perú S.A. 2014; lognormal variance with pedigree 0.0052, pedigree (3,3,3,1,1)
  Literature value, reported on the Environmental Impact Study (2014).
  properties: carbon content, fossil 0.51, dry mass 1 kg, heating value, net 23.88 MJ, wet mass 1 kg
- potassium nitrate: 0.86 kg; source SNC-Lavalin Perú S.A. 2014; lognormal variance with pedigree 0.0052, pedigree (3,3,3,1,1)
  (same comment as for copper sulfate)
  properties: dry mass 1 kg, wet mass 1 kg
- propylene glycol, liquid: 0.18 kg; source SNC-Lavalin Perú S.A. 2014; lognormal variance with pedigree 0.0052, pedigree (3,3,3,1,1)
  Proxy for the Flotanol H-53. Literature value, reported on the Environmental Impact Study (2014).
  properties: carbon content, fossil 0.473684, dry mass 1 kg, heating value, net 27.09 MJ, wet mass 1 kg
- scrap steel: -33.34 kg; name ByP_5; source SNC-Lavalin Perú S.A. 2014; lognormal variance with pedigree 0.0034, pedigree (3,3,2,1,1)
  Calculated value based on the input steel on the crushing and griding balls. Input steel value reported on the Environmental Impact Sudy (2014).
  production volume
    Calculated from production volume of reference product using the relative outputs.
  properties: dry mass 1 kg, wet mass 1 kg
- silica sand: 2.26 kg; name Input_4; source SNC-Lavalin Perú S.A. 2014; lognormal variance with pedigree 0.0052, pedigree (3,3,3,1,1)
  (same comment as for copper sulfate)
  properties: dry mass 0.99 kg, water content 0.010101, wet mass 1 kg
- soda ash, dense: 0.926 kg; source SNC-Lavalin Perú S.A. 2014; lognormal variance with pedigree 0.0052, pedigree (3,3,3,1,1)
  Proxy for the sodium carbonate anhydrous. Literature value reported on the Environmental Impact Study (2014).
  properties: carbon content, fossil 0.113208, dry mass 1 kg, heating value, net 3.43 MJ, wet mass 1 kg
- sodium borates: 17.18 kg; source SNC-Lavalin Perú S.A. 2014; lognormal variance with pedigree 0.0052, pedigree (3,3,3,1,1)
  (same comment as for copper sulfate)
  properties: dry mass 1 kg, wet mass 1 kg
- sodium cyanide: 1200 kg; source SNC-Lavalin Perú S.A. 2014; lognormal variance with pedigree 0.0052, pedigree (3,3,3,1,1)
  (same comment as for copper sulfate)
  properties: carbon content, fossil 0.244898, dry mass 1 kg, heating value, net 7.43 MJ, wet mass 1 kg
- sodium dithionite, anhydrous: 0.98 kg; source SNC-Lavalin Perú S.A. 2014; lognormal variance with pedigree 0.0052, pedigree (3,3,3,1,1)
  (same comment as for copper sulfate)
  properties: dry mass 1 kg, wet mass 1 kg
- sodium hypochlorite, without water, in 15% solution state: 1.73 kg; source SNC-Lavalin Perú S.A. 2014; lognormal variance with pedigree 0.0432, pedigree (3,3,5,1,1)
  Proxy for the calcium hypochlorite. Literature value reported on the Environmental Impact Study (2014).
  properties: dry mass 1 kg, wet mass 1 kg
- sodium nitrate: 2.9 kg; source SNC-Lavalin Perú S.A. 2014; lognormal variance with pedigree 0.0052, pedigree (3,3,3,1,1)
  (same comment as for copper sulfate)
  properties: dry mass 1 kg, wet mass 1 kg
- sodium silicate, solid: 0.7 kg; source SNC-Lavalin Perú S.A. 2014; lognormal variance with pedigree 0.0052, pedigree (3,3,3,1,1)
  (same comment as for copper sulfate)
  properties: dry mass 1 kg, wet mass 1 kg
- sodium sulfite: 11.5 kg; source SNC-Lavalin Perú S.A. 2014; lognormal variance with pedigree 0.0432, pedigree (3,3,5,1,1)
  Proxy for sodium disulfite used in the flotation process. Literature value, reported on the Environmental Impact Sudy (2014).
  properties: dry mass 1 kg, wet mass 1 kg
- steel, chromium steel 18/8: 33.34 kg; source Compañia de Minas Buenaventura S.A.A. 2016; lognormal variance with pedigree 0.0432, pedigree (3,3,5,1,1)
  Proxy for the steel balls used on the milling process.Calculated Value based on the information reported on the Environmental Impact Sudy (2014).
  properties: carbon content, fossil 0.0008, dry mass 1 kg, wet mass 1 kg
  note on carbon content, fossil: Stainless steel model is the grade 304 steel (18/8 stainless, 18% chromium 8% nickel; max. 0.08% C)
- sulfidic tailings, from silver mine operation: -47970.3 kg; name ByP_3; source Peruvian Ministry of Energy and Mines  2016; lognormal variance with pedigree 0.0034, pedigree (3,3,2,1,1)
  (same comment as for silver, unrefined)
  production volume
    Calculated from production volume of reference product using the relative outputs.
  property silver content 7.10552e-11; name ByP_3_Ag_content
  properties: aluminium content 0.017206, calcium content 0.003752, carbon content, fossil 0.007, dry mass 0.7 kg, iron content 0.013963, magnesium content 0.0020826, oxygen content 0.88851, potassium content 0.0032546, silicon content 0.055749, sodium content 0.0015368, water content 0.428571, wet mass 1 kg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
- sulfuric acid: 1.52 kg; source SNC-Lavalin Perú S.A. 2014; lognormal variance with pedigree 0.0052, pedigree (3,3,3,1,1)
  (same comment as for copper sulfate)
  properties: dry mass 1 kg, wet mass 1 kg
- wastewater, unpolluted: -536.073 m3; name ByP_4; = (WIM_1*Input_1-WIM_2*ByP_1+WIM_10*Input_2+WIM_3*Input_3+WIM_4*Input_4-WIM_5*ByP_3-WIM_7*Output_1-ByP_2*WIM_8+Input_5*WIM_9)/WIM_6; source Compañia de Minas Buenaventura S.A.A. 2016; lognormal variance with pedigree 0.0034, pedigree (3,3,2,1,1)
  Calculated value based on the water balance presented on the Environmental Impact Study
  production volume
    Calculated from production volume of reference product using the relative outputs.
  property water in wet mass 999.663 kg; name WIM_6
  properties: carbon content, fossil 0.00178991, carbon content, non-fossil 0.00178991, dry mass 0.337476 kg, water content 2962.17, wet mass 1000 kg
  note on carbon content, fossil: Assumed to be like in tap water. Bicarbonate content is 2.93 mol/m3. CO2 content is 0.1 mol/m3 (ecoinvent v2.2 report 8, Tab 93.1).
- zinc: 6.79 kg; source SNC-Lavalin Perú S.A. 2014; lognormal variance with pedigree 0.0052, pedigree (3,3,3,1,1)
  (same comment as for copper sulfate)
  properties: dry mass 1 kg, wet mass 1 kg
- zinc concentrate: -909.3 kg; name ByP_2; source Peruvian Ministry of Energy and Mines  2016; lognormal variance with pedigree 0.0034, pedigree (3,3,2,1,1)
  (same comment as for silver, unrefined)
  production volume
    Calculated from production volume of reference product using the relative outputs.
  property iron content 0.1021; name ByP_2_Fe_content
  property lead content 0.0125; name ByP_2_Pb_content
  property magnesium content 0.0751; name ByP_2_Mg_content
  property silver content 3.79028e-8; name ByP_2_Ag_content
  property zinc content 0.308; name ByP_2_Zn_content
  properties: dry mass 0.95 kg, price 0.38 EUR2005, water content 0.0526316, wet mass 1 kg
- zinc monosulfate: 58 kg; source Compañia de Minas Buenaventura S.A.A. 2016; lognormal variance with pedigree 0.0432, pedigree (3,3,5,1,1)
  (same comment as for copper sulfate)
  properties: dry mass 1 kg, wet mass 1 kg

## Inputs from nature
- Gangue [natural resource, in ground]: 13928 kg; name Input_1; source Compañia de Minas Buenaventura S.A.A. 2016; lognormal variance with pedigree 0.049225, pedigree (4,3,5,2,1)
  Proxy for the gangue frorm silver sulfide (Ag2S). Calculated value based on the process balance reported on the Environmental impact Study (2014). Only gangue that is taken to the surface is consider in the calculation (0.1 ton gangue/ton of mineral).
  property water in wet mass 0 kg; name WIM_1
- Lead [natural resource, in ground]: 444.7 kg; source Compañia de Minas Buenaventura S.A.A. 2016; lognormal variance with pedigree 0.0676, pedigree (3,3,5,1,1)
  Calculated value based on the composition of the ore extracted in ground (0.9% Pb)
- Magnesium [natural resource, in ground]: 4644.8 kg; source Compañia de Minas Buenaventura S.A.A. 2016; lognormal variance with pedigree 0.0676, pedigree (3,3,5,1,1)
  Calculated value based on the composition of the ore extracted in ground (8.8% Mn)
- Occupation, mineral extraction site [natural resource, land]: 0.00305943 m2*year; source Compañia de Minas Buenaventura S.A.A. 2016; lognormal variance with pedigree 0.0886, pedigree (4,3,5,1,1)
  Calculated value. based on the production within the life of mine (45 years) and 30 years as an average time1m2 is occupied before is recultivated.
- Silver [natural resource, in ground]: 24.6 kg; source SNC-Lavalin Perú S.A. 2014; lognormal variance with pedigree 0.0432, pedigree (3,3,5,1,1)
  Calculated value, based on the silver composition of the ore of 13.58 oz/tn.
- Transformation, from unspecified, natural (non-use) [natural resource, land]: 8.74124e-5 m2; source Peruvian Ministry of Energy and Mines  2016; lognormal variance with pedigree 0.1626, pedigree (3,3,5,1,1)
  Calculation based on a life time of 45 years and the relative production per year (1975-2020).
- Transformation, to industrial area [natural resource, land]: 8.74124e-5 m2; source Compañia de Minas Buenaventura S.A.A. 2016; lognormal variance with pedigree 0.1686, pedigree (4,3,5,1,1)
  (same comment as for Transformation, from unspecified, natural (non-use))
- Water, unspecified natural origin [natural resource, in water]: 554.38 m3; name Input_5; source SNC-Lavalin Perú S.A. 2014; lognormal variance with pedigree 0.0432, pedigree (3,3,5,1,1)
  Calculated value based on the water balance presented on the Environmental Impact Study
- Zinc [natural resource, in ground]: 567.9 kg; source Compañia de Minas Buenaventura S.A.A. 2016; lognormal variance with pedigree 0.0676, pedigree (3,3,5,1,1)
  Calculated value based on the composition of the ore extracted in ground (1.5% Zn)

## Emissions to nature
- Aluminium III [air, non-urban air or from high stacks]: 1.08 kg; source SNC-Lavalin Perú S.A. 2014; lognormal variance with pedigree 0.6926, pedigree (5,3,3,1,1)
  Calculated value, based on EPA equations for the following activities: Truckloading, material handling, nivelation, drilling, blasting, and erosion.
  https://www3.epa.gov/ttn/chief/ap42/ch13/final/c13s0204.pdf
  http://ulpeis.anl.gov/documents/dpeis/references/pdfs/Countess_Environmental_2006_WRAP_Fugitive.pdf
  https://www3.epa.gov/ttn/chief/ap42/ch11/final/c11s09.pdf
  https://www3.epa.gov/ttn/chief/ap42/ch15/draft/d15s09_jul09.pdf
  Process characteristics were extracted from the environmental impact study (SNC-Lavalin Perú S.A.,2014).
- Ammonia [air, non-urban air or from high stacks]: 0.3 kg; source SNC-Lavalin Perú S.A. 2014; lognormal variance with pedigree 0.0826, pedigree (5,3,3,1,1)
  (same comment as for Aluminium III)
- Carbon dioxide, fossil [air, non-urban air or from high stacks]: 66 kg; source SNC-Lavalin Perú S.A. 2014; lognormal variance with pedigree 0.0432, pedigree (5,3,3,1,1)
  (same comment as for Aluminium III)
- Carbon monoxide, fossil [air, non-urban air or from high stacks]: 34 kg; source SNC-Lavalin Perú S.A. 2014; lognormal variance with pedigree 0.6926, pedigree (5,3,3,1,1)
  (same comment as for Aluminium III)
- Lead II [air, non-urban air or from high stacks]: 10 kg; source SNC-Lavalin Perú S.A. 2014; lognormal variance with pedigree 0.6926, pedigree (5,3,3,1,1)
  (same comment as for Aluminium III)
- Methane, fossil [air, non-urban air or from high stacks]: 2.3 kg; source SNC-Lavalin Perú S.A. 2014; lognormal variance with pedigree 0.0826, pedigree (5,3,3,1,1)
  (same comment as for Aluminium III)
- Nitrogen oxides [air, non-urban air or from high stacks]: 2.46 kg; source SNC-Lavalin Perú S.A. 2014; lognormal variance with pedigree 0.0826, pedigree (5,3,3,1,1)
  (same comment as for Aluminium III)
- Particulate Matter, < 2.5 um [air, non-urban air or from high stacks]: 16 kg; source SNC-Lavalin Perú S.A. 2014; lognormal variance with pedigree 0.3426, pedigree (5,3,3,1,1)
  (same comment as for Aluminium III)
- Particulate Matter, > 2.5 um and < 10um [air, non-urban air or from high stacks]: 29 kg; source SNC-Lavalin Perú S.A. 2014; lognormal variance with pedigree 0.0776, pedigree (5,3,3,1,1)
  (same comment as for Aluminium III)
- VOC, volatile organic compounds [air, unspecified]: 0.09 kg; source SNC-Lavalin Perú S.A. 2014; lognormal variance with pedigree 0.2106, pedigree (5,5,5,5,5)
  (same comment as for Aluminium III)
- Water [air, non-urban air or from high stacks]: 3.84 m3; name Output_1; source Compañia de Minas Buenaventura S.A.A. 2016; lognormal variance with pedigree 0.2486, pedigree (4,3,5,1,1)
  Calculated value, based on the water balance in the Environmental Impact Study. Water that evaporates.
- Arsenic ion [water, surface water]: 0.0579711 kg; source Jongschaap REE 2007; lognormal variance with pedigree 0.6526, pedigree (1,3,3,1,1)
  Chemical load calculated based on the mass flow of the metals contained in the effluents and the flow measured in situ. The data were reported in the 2015 and 2016 water monitoring carried out for the Uchucchacua Mine unit.
- Copper ion [water, surface water]: 0.00818846 kg; source Compañia de Minas Buenaventura S.A.A. 2016; lognormal variance with pedigree 0.6526, pedigree (1,3,3,1,1)
  (same comment as for Arsenic ion)
- Cyanide [water, surface water]: 4.07386e-5 kg; source Compañia de Minas Buenaventura S.A.A. 2016; lognormal variance with pedigree 0.0426, pedigree (1,3,3,1,1)
  (same comment as for Arsenic ion)
- Iron ion [water, surface water]: 0.0981801 kg; source Compañia de Minas Buenaventura S.A.A. 2016; lognormal variance with pedigree 0.6526, pedigree (1,3,3,1,1)
  (same comment as for Arsenic ion)
- Lead II [water, surface water]: 0.0301466 kg; source Compañia de Minas Buenaventura S.A.A. 2016; lognormal variance with pedigree 0.6526, pedigree (1,3,3,1,1)
  (same comment as for Arsenic ion)
- Manganese II [water, surface water]: 0.998096 kg; source Compañia de Minas Buenaventura S.A.A. 2016; lognormal variance with pedigree 0.6526, pedigree (1,3,3,1,1)
  (same comment as for Arsenic ion)
- Mercury II [water, surface water]: 0.00102254 kg; source Compañia de Minas Buenaventura S.A.A. 2016; lognormal variance with pedigree 0.6526, pedigree (1,3,3,1,1)
  (same comment as for Arsenic ion)
- Suspended solids, unspecified [water, surface water]: 19.8 kg; source Compañia de Minas Buenaventura S.A.A. 2016; lognormal variance with pedigree 0.0426, pedigree (1,3,3,1,1)
  (same comment as for Arsenic ion)
- Zinc II [water, surface water]: 0.13 kg; source Compañia de Minas Buenaventura S.A.A. 2016; lognormal variance with pedigree 0.6526, pedigree (1,3,3,1,1)
  (same comment as for Arsenic ion)

## Sampling procedure
A representative silver mining unit was chosen to model the mining, benefication and smelting. The mining unit represents 11% of the overall national production.
