# heat and power co-generation, biogas, gas engine

Dataset: EcoSpold 2, unit process
Geography: CA-QC
Time period: 2007-01-01 to 2022-12-31
Technology level: modern
Classification: ISIC rev.4 ecoinvent: 3821:Treatment and disposal of non-hazardous waste
Classification: EcoSpold01Categories: biomass/cogeneration
Tags: Canada; with true value; biogas power
Scenario: Business-as-Usual
System model: Substitution, consequential, long-term
Generated by: Karin Treyer
Published in: Jungbluth N. 2007
Database: ecoinvent
isCopyrightProtected: true

## General comment
This dataset represents the production of electricity and heat from a biogas mix from different sources (biowaste, sewage sludge) when burning it in a cogeneration unit with gas engine. It is intended to represent the production of grid-connected electricity with biogas. The main product is then considered to be electricity at high voltage, while heat is produced as a co-product. The cogeneration unit has a capacity of 160 kWel; the degrees of efficiency are as follows: electricity: 0.37 and heat: 0.53. A mix of biogas is treated in this dataset with an average lower heating value of 22.73 MJ/Nm3.

## Included activities start
From the cogeneration unit ready to treat biogas and from the biogas entry at the power plant.

## Included activities end
This activity ends with the production of electricity high voltage, corresponding to the treatment of 1m3 of biogas in a cogeneration unit.

This dataset includes emissions to air, biogas consumption, use and disposal of operational supplements as well as infrastructure expenditures.

## Geography
Conditions of cogeneration in Switzerland.

## Technology
Lambda 1-engine" with a catalytic converter.
Electrical efficiency: 0.32
Thermal efficiency: 0.55

## Time period
The Annual Production Volume is valid for the year 2014

## Parameters
- electrical efficiency: 0.37 dimensionless; name efficiency_electrical; lognormal variance with pedigree 0.0166, pedigree (3,4,3,5,3)
  Literature value. Bauer et al. 2012, Tab. 4 in chapter 4.2.6
  Bauer, C., Frischknecht, R., Eckle, P., Flury, K., Neal, T., Papp, K., Schori, S., Simons, A., Stucki, M., Treyer, K. Umweltauswirkungen der Stromerzeugung in der Schweiz. Ausgearbeitet durch ESU-services GmbH und Paul Scherrer Institut im Auftrag des Bundesamtes für Energie BFE, Bern, Schweiz.
- gross electricity production: 2.93e7 kWh; name gross_electricity; lognormal variance with pedigree 6, pedigree (1,1,1,1,1)
  Measured value from Hydro Quebec
- losses from gross electricity production: 0.03 dimensionless; name losses_gross_net; lognormal variance with pedigree 0.003525, pedigree (3,2,2,2,2)
  Assumption/Calculated value. Own use of electricity plants in this country in 2012. For the OECD countries, the OECD iLibrary provides gross and net electricity values for the specific sector "Total Fuel Combustion", from which the loss value is being calculated. This value is then applied to all fossil fuel datasets, as no data on a more detailed level were available. In this specific case, the resulting value was unrealistically low (only 1% own use), so that it was arbitrarily set to 3%.
  OECD. 2014. IEA Electricity Information Statistics: OECD - Electricity and heat generation. OECD iLibrary. Online database. DOI : 10.1787/elect-data-en
  nan
- thermal efficiency: 0.53 dimensionless; name efficiency_thermal; lognormal variance with pedigree 0.0166, pedigree (3,4,3,5,3)
  Literature value. Jungbluth et al. 2007 (see general source) Tab. 13.9, p. 251
  nan

## Reference product
- electricity, high voltage: 1 kWh; name electricity; = lower_heating_value* efficiency_electrical/3.6; By-product classification allocatable product; CPC 17100: Electrical energy
  Calculated value. 3.6 MJ/kWh
  production volume 2.8421e7 kWh
    Literature value/statistics. Net production of grid-connected electricity from biogas in 2012. No power plant own uses (losses from gross to net) have been assumed. Taken from the IEA electricity information 2014, table 1.3 (biogases/liquid biofuels).
    IEA. 2014. Electricity Information 2014. ISBN 978-92-64-21692-1. International Energy Agency (IEA), Paris Cedex (FR).
  property exergy 3.6 MJ
    allocation factor for electricity (=1) vs. heat, where heat is calculated as the termodynamic mean temperature Tm = (Tfeed-Treturn)/ln(Tfeed/Treturn), relative to the application temperature (Tu, typically = 293 K), i.e. (Tm-Tu)/Tm
  property price 0.0977 EUR2005
    Temporary price data. Calculated as 90% of purchasers price based on: 94% of the average price (to account for a 6% loss in transformation and transmission) for electricity for industrial consumersin 2005 (excluded taxes). From IEA.
  properties: carbon allocation 0 kg, carbon content 0, true value relation 3.6

## Inputs from technosphere
- biogas: 0.428057 m3; lognormal variance with pedigree 0.062, pedigree (1,4,5,5,3)
  property heating value, net 22.73 MJ; name lower_heating_value
  properties: carbon content, non-fossil 0.449939, dry mass 1.15 kg, wet mass 1.15 kg
  note on carbon content, non-fossil: Total C content in kg/Nm3 (Tab 12.8, ecoinvent v2.2 report n17), referred to 1kg DM
  note on heating value, net: Value taken from the general comment of "heat and power co-generation, biogas, gas engine" dataset.
- heat and power co-generation unit, 160kW electrical, common components for heat+electricity: 4.86539e-8 unit; lognormal variance with pedigree 0.362, pedigree (1,4,5,5,3)
  value for cogeneration of natural gas used as approximination
- heat and power co-generation unit, 160kW electrical, components for electricity only: 4.86539e-8 unit; lognormal variance with pedigree 0.362, pedigree (1,4,5,5,3)
  value for cogeneration of natural gas used as approximination
- heat and power co-generation unit, 160kW electrical, components for heat only: 4.86539e-8 unit; lognormal variance with pedigree 0.362, pedigree (1,4,5,5,3)
  value for cogeneration of natural gas used as approximination
- heat, central or small-scale, other than natural gas: -5.15676 MJ; name heat; = lower_heating_value* efficiency_thermal
  Calculated value
  production volume
    Calculated from the electricity production volumes and the relative amounts.
  properties: exergy 0.169678 MJ, heating value, net 1 MJ, price 0.0106 EUR2005
  note on exergy: allocation factor for electricity (=1) vs. heat, where heat is calculated as the termodynamic mean temperature Tm = (Tfeed-Treturn)/ln(Tfeed/Treturn), relative to the application temperature (Tu, typically = 293 K), i.e. (Tm-Tu)/Tm
- lubricating oil: 0.000291892 kg; name lubricating_oil; = (0.03/1000)* lower_heating_value; source Heck, T. 2007, p. p. 252 in Jungbluth et al. 200; lognormal variance with pedigree 0.062, pedigree (1,4,5,5,3)
  value for cogeneration of natural gas used as approximination. Assumption of a lubricate consumption of 0.03 g/MJin
  properties: carbon content, fossil 0.75, dry mass 1 kg, heating value, net 40.2 MJ, wet mass 1 kg
  note on carbon content, fossil: Lubricating oil is produced from diesel. C-content/dry mass of fats and oils considered 75%, from: ecoinvent v2.2 report, n 15a, pg 40
  note on heating value, net: Literature value, Source: IPCC 2006, 2006 IPCC Guidelines for National Greenhouse Gas Inventories, Prepared by the National Greenhouse Gas Inventories Programme, Eggleston H.S., Buendia L., Miwa K., Ngara T. and Tanabe K. (eds). Published: IGES, Japan
- waste mineral oil: -0.000291921 kg; name waste_oil; = lubricating_oil; lognormal variance with pedigree 0.0222, pedigree (1,4,2,5,3)
  value for cogeneration of natural gas used as approximation
  production volume
    Calculated from the production volume of electricity in proportion to the respective output amounts.
  properties: carbon content, fossil 0.864444, dry mass 0.9 kg, heating value, net 34.7 MJ, water content 0.111111, wet mass 1 kg
  note on carbon content, fossil: Tab A.6, ecoinvent v2.2 report 13_I. C content has been calculated after data in the tables, and then referred to 1 kg DM
  note on heating value, net: Value taken from the general comment of the treatment dataset.

## Emissions to nature
- Carbon dioxide, non-fossil [air, non-urban air or from high stacks]: 0.812432 kg; = 0.0835* lower_heating_value; lognormal variance with pedigree 0.062, pedigree (1,4,5,5,3)
  own calculations based on carbon content in biogas. See Tab. 13.10, which results in CO2 emissions of 0.0835 kg/MJin
- Carbon monoxide, non-fossil [air, non-urban air or from high stacks]: 0.000467077 kg; source Heck, T. 2007, p. p. 252 in Jungbluth et al. 200; lognormal variance with pedigree 0.182, pedigree (1,4,5,5,3)
  value for cogeneration of natural gas used as approximination
- Dinitrogen monoxide [air, non-urban air or from high stacks]: 2.43269e-5 kg; source Heck, T. 2007, p. p. 252 in Jungbluth et al. 200; lognormal variance with pedigree 0.362, pedigree (1,4,5,5,3)
  value for cogeneration of natural gas used as approximination
- Methane, non-fossil [air, non-urban air or from high stacks]: 0.000223808 kg; source Heck, T. 2007, p. p. 252 in Jungbluth et al. 200; lognormal variance with pedigree 0.362, pedigree (1,4,5,5,3)
  value for cogeneration of natural gas used as approximination
- NMVOC, non-methane volatile organic compounds [air, non-urban air or from high stacks]: 1.94615e-5 kg; lognormal variance with pedigree 0.362, pedigree (1,4,5,5,3)
  value for cogeneration of natural gas used as approximination
- Nitrogen oxides [air, non-urban air or from high stacks]: 0.000145946 kg; = (15/1000^2)* lower_heating_value; lognormal variance with pedigree 0.182, pedigree (1,4,5,5,3)
  value for cogeneration of natural gas used as approximination. 15mg/MJin NOx emissions for a lambda 1-engine with a catalytic converter
- Platinum [air, non-urban air or from high stacks]: 6.81154e-11 kg; source Heck, T. 2007, p. p. 252 in Jungbluth et al. 200; lognormal variance with pedigree 0.712, pedigree (1,4,5,5,3)
  value for cogeneration of natural gas used as approximination
- Sulfur dioxide [air, non-urban air or from high stacks]: 0.000243243 kg; = (25/1000^2)* lower_heating_value; lognormal variance with pedigree 0.062, pedigree (1,4,5,5,3)
  own calculations based on sulphur content in biogas (assumption: 300mg/m3)

## Sampling procedure
Literature data

## Extrapolations
This dataset has been copied from an original dataset covering the geography CH without any adjustment of emissions. The uncertainty has been adjusted accordingly.
The annual production volume is valid for 2013.

Dataset copied from a dataset valid for Switzerland.
