# treatment of waste paperboard, municipal incineration

Dataset: EcoSpold 2, unit process
Geography: RoW
Time period: 2006-01-01 to 2022-12-31
Technology level: current
Classification: ISIC rev.4 ecoinvent: 3821:Treatment and disposal of non-hazardous waste
Synonyms: Siedlungsabfallverbrennung; Kehrichtverbrennung; municipal waste incineration
Scenario: Business-as-Usual
System model: Substitution, consequential, long-term
Share of production covered: 1.8 %
Generated by: Gabor Doka
Published in: Doka G. 2013
Database: ecoinvent
isCopyrightProtected: true

## General comment
This dataset represents the activity of waste disposal of waste paperboard in a municipal solid waste incinerator (MSWI) // Recommended use of this dataset: For cardboard, which goes to disposal as part of communal waste mixture. Larger amounts of separated cardboard will likely not be disposed in incinerators or landfills, but rather go to recycling. // // Waste composition (wet, in ppm): upper heating value 17.91 MJ/kg; lower heating value 15.92 MJ/kg; H2O 104370; O 392680; H 57791; C 433270; S 1776.8; N 2583.5; P n.a.; B n.a.; Cl 7173.3; Br n.a.; F n.a.; I n.a.; Ag n.a.; As 1.168; Ba 57.193; Cd 0.93313; Co 0.91806; Cr 9.2403; Cu 35.113; Hg 0.30131; Mn 95.196; Mo n.a.; Ni 10.64; Pb 28.963; Sb 0.0046044; Se 3.1073; Sn 6.7521; V n.a.; Zn 63.333; Be 1.1299; Sc n.a.; Sr 45.009; Ti n.a.; Tl n.a.; W n.a.; Si n.a.; Fe n.a.; Ca n.a.; Al n.a.; K n.a.; Mg n.a.; Na n.a.; // Share of carbon in waste that is biogenic 100%. // Share of metals in waste not oxidised and bulk-recyclable (exclude very small or thin parts) Iron: 0%; Alu: 0%; Copper: 0%. // One kg of this waste produces 0.009791 kg of slag and 0.00712 kg of residues, which are landfilled. Additional solidification with 0.002848 kg of cement. // Net energy production: 1.99MJ/kg electric energy and 3.98MJ/kg thermal energy. // Recovery of metal scrap to recycling: 0g iron scrap, 0g aluminium scrap, 0g copper scrap.

## Included activities start
waste incineration from waste reception gate and delivery into waste bunker at incinerator plant site (without transports to the incinerator)

## Included activities end
Waste-specific short-term emissions to water from leachate. Long-term emissions from landfill to ground water.

## Geography
Specific to the technology mix encountered in Switzerland in 2010. Well applicable to modern incineration practices in Europe, North America or Japan.

## Technology
average Swiss MSWI plants in 2010 (grate incinerators) with electrostatic precipitator for fly ash (ESP), wet flue gas scrubber and 25% SNCR , 42.77% SCR-high dust , 32.68% SCR-low dust -DeNOx facilities and 0% without Denox (weighted according to mass of burnt waste, representing Swiss average). Efficiency of iron scrap separation from slag : 58%. Efficiency of non-ferrous scrap separation from slag : 31%. Gross electric efficiency technology mix 15.84% and Gross thermal efficiency technology mix 28.51%

## Time period
Waste composition as given in literature reference, theoretical data or other source. Transfer coefficients for modern MSWI.

## Reference product
- waste paperboard: -1 kg; By-product classification Waste; CPC 39240: Waste and scrap of paper or paperboard
  Main reference product of this activity (supply of disposal service).
  production volume 9.4163e9 kg
    based on estimate on MSW in WTE globally and share of sum paper+cardboard in MSW in top WTE countries (UNSD 2011) and share of cardboard in sum paper+cardboard in Swiss MSW
  property heating value, net 15.92 MJ
    Value taken from the general comment of the treatment dataset.
  property price 0 EUR2005
    Waste products are assigned a price of zero as they are assumed to require further treatment.
  properties: carbon allocation 0.38854 kg, carbon content 0.483259, carbon content, fossil 0, carbon content, non-fossil 0.483259, dry mass 0.804 kg, water content 0.243781, water in wet mass 0.196 kg, wet mass 1 kg

## Inputs from technosphere
- ammonia, anhydrous, liquid: 1.91427e-5, 3.89476e-6, 3.71599e-5, 0.000143139, 1.7411e-5, 1.15298e-5, 0.000411894, 3.79285e-5 kg (8 suppliers, which the file names only by identifier); sum of these 0.0006821 kg; lognormal variance with pedigree 0.579, pedigree (1,1,4,1,1)
  Input to DeNOx stage (100% NH3).
  Uncertainty: uncertainty calculated from uncertainty in average DeNOx input, uncertainty in the share of thermal NOx, uncertainty of nitrogen content in average municipal waste and the uncertainty in nitrogen content in *this* waste.
  properties: dry mass 1 kg, wet mass 1 kg
- cement, unspecified: 3.74379e-5, 6.14338e-5, 0.000233311, 2.9012e-6, 5.76612e-6, 8.81541e-6, 0.00234956, 7.32335e-6, 0.00014135 kg (9 suppliers, which the file names only by identifier); sum of these 0.0028479 kg; lognormal variance with pedigree 0.089006, pedigree (1,1,4,1,1)
  Cement required for solidification of landfilled residual material.
  Uncertainty: Uncertainty calculated from uncertainty of the waste composition of this waste, of transfer coefficients in the incinerator and of the solidification recipe.
  properties: dry mass 1 kg, wet mass 1 kg
- chemical, inorganic: 0.00024228 kg; lognormal variance with pedigree 0.30681, pedigree (1,1,4,1,1)
  Auxilliary inputs for the wastewater treatment stage of the incinerator plant. Proxy for Polyelectrolyte.
  Uncertainty: uncertainty calculated from uncertainty in average Polyelectrolyte input, of transfer coefficients in the incinerator, and the uncertainty of the waste composition of this waste
  properties: carbon content, fossil 0.003, dry mass 1 kg, wet mass 1 kg
- chemical, organic: 5.2332e-6 kg; lognormal variance with pedigree 1.6602, pedigree (1,1,4,1,1)
  Auxilliary inputs for the wastewater treatment stage of the incinerator plant. Proxy for (pure) Trisodium-trimercapto-s-triazine (CAS 17766-26-6), used as 15% diluted solution, aka TMT15.
  Uncertainty: uncertainty calculated from uncertainty in average TMT15 input, of transfer coefficients in the incinerator, and the uncertainty of the waste composition of this waste
  properties: carbon content, fossil 0.628, dry mass 1 kg, heating value, net 19.03 MJ, wet mass 1 kg
- chromium oxide, flakes: 8.7215e-7 kg; lognormal variance with pedigree 0.90412, pedigree (1,1,4,1,1)
  Input to DeNOx stage.
  Uncertainty: uncertainty calculated from uncertainty in average DeNOx input, uncertainty in the share of thermal NOx, uncertainty of nitrogen content in average municipal waste and the uncertainty in nitrogen content in *this* waste.
  properties: dry mass 1 kg, wet mass 1 kg
- electricity, for reuse in municipal waste incineration only: -0.0221024, -0.0221024, -0.0221024, -0.0221024, -0.0221024, -0.0221024, -0.0221024, -0.0221024, -0.0221024, -0.0221024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 kWh (25 suppliers, which the file names only by identifier); sum of these -0.55256 kWh; lognormal variance with pedigree 0.10518, pedigree (1,1,1,1,1)
  Net electricity generated from this waste and used in internal MSWI plant energy redistribution.
  Uncertainty: uncertainty is calculated from uncertainties in waste composition and uncertainties in energy efficiency and the uncertainty in internal energy demand
  production volume
    calculated in proportion to reference product waste input to incinerator
  properties: exergy 3.6 MJ, price 0.1 EUR2005
  note on exergy: This exergy property is based on the exergy content of the product.
- heat, district or industrial, natural gas: 0.0122432, 0.03462, 0.0806868 MJ (3 suppliers, which the file names only by identifier); sum of these 0.12755 MJ; lognormal variance with pedigree 0.579, pedigree (1,1,4,1,1)
  Input to DeNOx stage, to heat up flue gas in low-dust SCR.
  Uncertainty: uncertainty calculated from uncertainty in average DeNOx input, uncertainty in the share of thermal NOx, uncertainty of nitrogen content in average municipal waste and the uncertainty in nitrogen content in *this* waste.
  properties: heating value, net 1 MJ
- heat, for reuse in municipal waste incineration only: -0.15928, -0.15928, -0.15928, -0.15928, -0.15928, -0.15928, -0.15928, -0.15928, -0.15928, -0.15928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 MJ (25 suppliers, which the file names only by identifier); sum of these -3.982 MJ; lognormal variance with pedigree 0.062263, pedigree (1,1,1,1,1)
  (same comment as for electricity, for reuse in municipal waste incineration only)
  production volume
    calculated in proportion to reference product waste input to incinerator
  properties: exergy 0.1842 MJ, price 0.0106 EUR2005
- hydrochloric acid, without water, in 30% solution state: 6.3681e-5 kg; lognormal variance with pedigree 0.30681, pedigree (1,1,4,1,1)
  Auxilliary inputs for the wastewater treatment stage of the incinerator plant.
  Uncertainty: uncertainty calculated from uncertainty in average HCl input, of transfer coefficients in the incinerator, and the uncertainty of the waste composition of this waste
  properties: dry mass 1 kg, heating value, net 3.32 MJ, wet mass 1 kg
- iron (III) chloride, without water, in 40% solution state: 9.1111e-6 kg; lognormal variance with pedigree 0.45899, pedigree (1,1,4,1,1)
  Auxilliary inputs for the wastewater treatment stage of the incinerator plant.
  Uncertainty: uncertainty calculated from uncertainty in average FeCl3 input, of transfer coefficients in the incinerator, and the uncertainty of the waste composition of this waste
  properties: dry mass 1 kg, wet mass 1 kg
- municipal waste incineration facility: 2.5e-10 unit
  Demands per kilogram waste.
- process-specific burdens, residual material landfill: 0.00201401, 0.00510579 kg (2 suppliers, which the file names only by identifier); sum of these 0.0071198 kg; lognormal variance with pedigree 0.079922, pedigree (1,1,4,1,1)
  Mass-specific expenditures required for landfilling of incineration residues.
  Uncertainty: uncertainty is calculated from uncertainties in waste composition and transfer coefficients in incinerator
- process-specific burdens, slag landfill: 0.00252369, 0.00639791 kg (2 suppliers, which the file names only by identifier); sum of these 0.0089216 kg; lognormal variance with pedigree 0.035905, pedigree (1,1,4,1,1)
  Mass-specific expenditures required for landfilling of bottom ash.
  Uncertainty: uncertainty is calculated from uncertainties in waste composition and transfer coefficients in incinerator
- quicklime, milled, packed: 0.0038215 kg; lognormal variance with pedigree 0.41524, pedigree (1,1,4,1,1)
  Auxilliary inputs for the flue gas treatment stage of the incinerator plant.
  Uncertainty: uncertainty calculated from uncertainty in average CaO input, of transfer coefficients in the incinerator, and the uncertainty of the waste composition of this waste
  properties: dry mass 0.99 kg, water content 0.010101, wet mass 1 kg
- residual material landfill: 1.4833e-11 unit; lognormal variance with pedigree 0.079922, pedigree (1,1,4,1,1)
  Landfill infrastructure required for landfilling of incineration residues.
  Uncertainty: uncertainty is calculated from uncertainties in waste composition and transfer coefficients in incinerator
- slag landfill: 1.5861e-11 unit; lognormal variance with pedigree 0.035905, pedigree (1,1,4,1,1)
  Landfill infrastructure required for landfilling of bottom ash.
  Uncertainty: uncertainty is calculated from uncertainties in waste composition and transfer coefficients in incinerator
- sodium hydroxide, without water, in 50% solution state: 0.0013446 kg; lognormal variance with pedigree 0.21928, pedigree (1,1,4,1,1)
  Auxilliary inputs for the flue gas treatment stage of the incinerator plant.
  Uncertainty: uncertainty calculated from uncertainty in average NaOH input, of transfer coefficients in the incinerator, and the uncertainty of the waste composition of this waste
  properties: dry mass 1 kg, heating value, net 3.03 MJ, wet mass 1 kg
- titanium dioxide: 4.2735e-5 kg; lognormal variance with pedigree 0.90412, pedigree (1,1,4,1,1)
  Input to DeNOx stage (TiO2 catalyst carrier)
  Uncertainty: uncertainty calculated from uncertainty in average DeNOx input, uncertainty in the share of thermal NOx, uncertainty of nitrogen content in average municipal waste and the uncertainty in nitrogen content in *this* waste.
  properties: dry mass 1 kg, wet mass 1 kg
- transport, freight, lorry, unspecified: 1.14968e-5, 7.34321e-5, 0.000556731 metric ton*km (3 suppliers, which the file names only by identifier); sum of these 0.00064166 metric ton*km; lognormal variance with pedigree 0.03136, pedigree (1,1,4,1,1)
  Transport services to transport incineration residues to landfills.
  Uncertainty: uncertainty calculated from uncertainty of the waste composition of this waste, uncertainty of transfer coefficients and the uncertainty in generic transportation distances
- waste cement, hydrated: -0.00201401, -0.00510579 kg (2 suppliers, which the file names only by identifier); sum of these -0.0071198 kg; lognormal variance with pedigree 0.081006, pedigree (1,1,1,1,1)
  Hydrated cement output for solidification of landfilled residual material.
  Uncertainty: Uncertainty calculated from uncertainty of the waste composition of this waste and transfer coefficients in the incinerator and of the solidification recipe.
  production volume
    calculated in proportion to reference product waste input to incinerator
  properties: dry mass 1 kg, wet mass 1 kg
- water, decarbonised: 0.271793, 0.0346103, 0.429287, 0.00242883, 0.0439958, 0.0663704, 0.0258987, 0.0133799, 0.505718, 0.0806217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 kg (12 suppliers, which the file names only by identifier); sum of these 1.5448 kg; lognormal variance with pedigree 0.45899, pedigree (1,1,4,1,1)
  Incinerator process water used in flue gas scrubber stage.
  Uncertainty: uncertainty calculated from uncertainty in average water input, and the uncertainty of the waste composition of this waste
  properties: wet mass 1 kg

## Inputs from nature
- Oxygen [natural resource, in air]: 1.6251 kg; lognormal variance with pedigree 0.034229, pedigree (1,1,4,1,1)
  Oxygen from ambient air needed to combust and oxidise this waste. Net demand, i.e. without O2 leaving the plant in flue gas uncombusted.
  Uncertainty: uncertainty is calculated from uncertainties in waste composition and transfer coefficients to flue gas and soild residues in incinerator

## Emissions to nature
- Ammonia [air, urban air close to ground]: 8.0198e-7 kg; lognormal variance with pedigree 0.62835, pedigree (1,1,4,1,1)
  Nitrogen species emitted to air after DeNOx stage.
  Uncertainty: uncertainty calculated from uncertainty in average N-emissions and uncertainty in the share of thermal NOx and the uncertainty in nitrogen content in *this* waste.
- Antimony ion [air, urban air close to ground]: 3.6884e-15 kg; lognormal variance with pedigree 1.9989, pedigree (1,1,4,1,1)
  Emission to air from waste composition and transfer coefficients.
  Uncertainty: uncertainty is calculated from uncertainties in waste composition and transfer coefficients in incinerator
- Arsenic ion [air, urban air close to ground]: 9.1492e-9 kg; lognormal variance with pedigree 1.5703, pedigree (1,1,4,1,1)
  (same comment as for Antimony ion)
- Barium II [air, urban air close to ground]: 2.2449e-7 kg; lognormal variance with pedigree 1.0608, pedigree (1,1,4,1,1)
  (same comment as for Antimony ion)
- Benzene [air, urban air close to ground]: 3.1975e-8 kg; lognormal variance with pedigree 0.098548, pedigree (1,1,4,1,1)
  Incomplete combustion product emitted to air.
  Uncertainty: uncertainty calculated from uncertainty in average operation emissions, and the uncertainty of the flue gas volume from this waste.
- Benzene, hexachloro- [air, urban air close to ground]: 6.6858e-11 kg; lognormal variance with pedigree 0.098548, pedigree (1,1,4,1,1)
  (same comment as for Benzene)
- Benzene, pentachloro- [air, urban air close to ground]: 1.6893e-10 kg; lognormal variance with pedigree 0.098548, pedigree (1,1,4,1,1)
  (same comment as for Benzene)
- Benzo(a)pyrene [air, urban air close to ground]: 7.1155e-13 kg; lognormal variance with pedigree 0.42724, pedigree (1,1,4,1,1)
  (same comment as for Benzene)
- Cadmium II [air, urban air close to ground]: 4.7562e-10 kg; lognormal variance with pedigree 1.6132, pedigree (1,1,4,1,1)
  (same comment as for Antimony ion)
- Carbon dioxide, non-fossil [air, urban air close to ground]: 1.579 kg; lognormal variance with pedigree 0.027863, pedigree (1,1,4,1,1)
  (same comment as for Antimony ion)
- Carbon monoxide, non-fossil [air, urban air close to ground]: 5.4354e-5 kg; lognormal variance with pedigree 0.82322, pedigree (1,1,4,1,1)
  (same comment as for Benzene)
- Chromium III [air, urban air close to ground]: 8.0687e-9 kg; lognormal variance with pedigree 1.31, pedigree (1,1,4,1,1)
  (same comment as for Antimony ion)
- Cobalt II [air, urban air close to ground]: 1.6697e-9 kg; lognormal variance with pedigree 1.606, pedigree (1,1,4,1,1)
  (same comment as for Antimony ion)
- Copper ion [air, urban air close to ground]: 3.216e-9 kg; lognormal variance with pedigree 1.1416, pedigree (1,1,4,1,1)
  (same comment as for Antimony ion)
- Cyanide [air, urban air close to ground]: 8.2783e-6 kg; lognormal variance with pedigree 1.3172, pedigree (1,1,4,1,1)
  (same comment as for Ammonia)
- Dinitrogen monoxide [air, urban air close to ground]: 3.8532e-5 kg; lognormal variance with pedigree 1.3172, pedigree (1,1,4,1,1)
  (same comment as for Ammonia)
- Dioxins, measured as 2,3,7,8-tetrachlorodibenzo-p-dioxin [air, urban air close to ground]: 6.3946e-14 kg; lognormal variance with pedigree 0.42724, pedigree (1,1,4,1,1)
  (same comment as for Benzene)
- Heat, waste [air, urban air close to ground]: 13.203 MJ; lognormal variance with pedigree 0.055987, pedigree (1,1,4,1,1)
  Waste heat generated from heating value of this waste plus any electricity required to process it.
  Uncertainty: uncertainty is calculated from uncertainties in waste composition and uncertainties in energy efficiency and the uncertainty in internal energy demand
- Hydrochloric acid [air, urban air close to ground]: 4.0935e-6 kg; lognormal variance with pedigree 0.43886, pedigree (1,1,4,1,1)
  (same comment as for Antimony ion)
- Lead II [air, urban air close to ground]: 2.3861e-9 kg; lognormal variance with pedigree 1.171, pedigree (1,1,4,1,1)
  (same comment as for Antimony ion)
- Manganese II [air, urban air close to ground]: 1.818e-8 kg; lognormal variance with pedigree 1.0093, pedigree (1,1,4,1,1)
  (same comment as for Antimony ion)
- Mercury II [air, urban air close to ground]: 8.5433e-9 kg; lognormal variance with pedigree 1.7409, pedigree (1,1,4,1,1)
  (same comment as for Antimony ion)
- Methane, non-fossil [air, urban air close to ground]: 4.7962e-7 kg; lognormal variance with pedigree 0.098548, pedigree (1,1,4,1,1)
  (same comment as for Benzene)
- NMVOC, non-methane volatile organic compounds [air, urban air close to ground]: 1.4552e-6 kg; lognormal variance with pedigree 0.098548, pedigree (1,1,4,1,1)
  (same comment as for Benzene)
- Nickel II [air, urban air close to ground]: 1.3366e-8 kg; lognormal variance with pedigree 1.2881, pedigree (1,1,4,1,1)
  (same comment as for Antimony ion)
- Nitrogen oxides [air, urban air close to ground]: 0.00025396 kg; lognormal variance with pedigree 0.62835, pedigree (1,1,4,1,1)
  Sum of fuel-Nox and thermal-NOx emitted to air after DeNOx stage.
  Uncertainty: uncertainty calculated from uncertainty in average N-emissions and uncertainty in the share of thermal NOx and the uncertainty in nitrogen content in *this* waste.
- Particulate Matter, < 2.5 um [air, urban air close to ground]: 3.8176e-6 kg; lognormal variance with pedigree 0.42724, pedigree (1,1,4,1,1)
  (same comment as for Benzene)
- Particulate Matter, > 2.5 um and < 10um [air, urban air close to ground]: 1.9184e-8 kg; lognormal variance with pedigree 0.2058, pedigree (1,1,4,1,1)
  (same comment as for Benzene)
- Phenol, pentachloro- [air, urban air close to ground]: 1.3925e-11 kg; lognormal variance with pedigree 0.098548, pedigree (1,1,4,1,1)
  (same comment as for Benzene)
- Selenium IV [air, urban air close to ground]: 3.707e-8 kg; lognormal variance with pedigree 1.4407, pedigree (1,1,4,1,1)
  (same comment as for Antimony ion)
- Strontium [air, urban air close to ground]: 4.5009e-9 kg; lognormal variance with pedigree 1.1122, pedigree (1,1,4,1,1)
  (same comment as for Antimony ion)
- Sulfur dioxide [air, urban air close to ground]: 1.8895e-5 kg; lognormal variance with pedigree 0.60297, pedigree (1,1,4,1,1)
  (same comment as for Antimony ion)
- Tin ion [air, urban air close to ground]: 4.4105e-12 kg; lognormal variance with pedigree 1.4045, pedigree (1,1,4,1,1)
  (same comment as for Antimony ion)
- Toluene [air, urban air close to ground]: 6.395e-8 kg; lognormal variance with pedigree 0.098548, pedigree (1,1,4,1,1)
  (same comment as for Benzene)
- Water [air, urban air close to ground]: 0.001479 m3; lognormal variance with pedigree 1.544, pedigree (1,1,4,1,1)
  Water vapour from waste humidity, hydrogen oxidation and part of the process water.
  Uncertainty: Uncertainty calculated from uncertainty in waste composition, process water input and the uncertainty of fraction to air.
- Zinc II [air, urban air close to ground]: 4.245e-8 kg; lognormal variance with pedigree 1.0534, pedigree (1,1,4,1,1)
  (same comment as for Antimony ion)
- Antimony ion [water, ground-, long-term]: 2.9281e-9 kg; lognormal variance with pedigree 1.8841, pedigree (1,1,4,1,1)
  Long-term emissions from landfilling of incineration residues.
  Uncertainty: uncertainty is calculated from uncertainties in waste composition and transfer coefficients in incinerator and landfills.
- Antimony ion [water, surface water]: 1.587e-9 kg; lognormal variance with pedigree 1.9222, pedigree (1,1,4,1,1)
  Emissions to water from waste composition and transfer coefficients in incinerator and landfills.
  Uncertainty: uncertainty is calculated from uncertainties in waste composition and transfer coefficients in incinerator and landfills
- Arsenic ion [water, ground-, long-term]: 3.4976e-7 kg; lognormal variance with pedigree 1.558, pedigree (1,1,4,1,1)
  (same comment as for Antimony ion)
- Arsenic ion [water, surface water]: 8.0908e-7 kg; lognormal variance with pedigree 1.4415, pedigree (1,1,4,1,1)
  (same comment as for Antimony ion)
- BOD5, Biological Oxygen Demand [water, ground-, long-term]: 0.0010643 kg; lognormal variance with pedigree 0.030743, pedigree (1,1,4,1,1)
  (same comment as for Antimony ion)
- BOD5, Biological Oxygen Demand [water, surface water]: 0.00050032 kg; lognormal variance with pedigree 0.051085, pedigree (1,1,4,1,1)
  (same comment as for Antimony ion)
- Barium II [water, ground-, long-term]: 2.8803e-5 kg; lognormal variance with pedigree 2.3572, pedigree (1,1,4,1,1)
  (same comment as for Antimony ion)
- Barium II [water, surface water]: 7.6977e-9 kg; lognormal variance with pedigree 1.3241, pedigree (1,1,4,1,1)
  (same comment as for Antimony ion)
- Beryllium II [water, ground-, long-term]: 1.0327e-6 kg; lognormal variance with pedigree 1.483, pedigree (1,1,4,1,1)
  (same comment as for Antimony ion)
- Beryllium II [water, surface water]: 7.077e-10 kg; lognormal variance with pedigree 2.0771, pedigree (1,1,4,1,1)
  (same comment as for Antimony ion)
- COD, Chemical Oxygen Demand [water, ground-, long-term]: 0.0032537 kg; lognormal variance with pedigree 0.030743, pedigree (1,1,4,1,1)
  (same comment as for Antimony ion)
- COD, Chemical Oxygen Demand [water, surface water]: 0.00050684 kg; lognormal variance with pedigree 0.049954, pedigree (1,1,4,1,1)
  (same comment as for Antimony ion)
- Cadmium II [water, ground-, long-term]: 6.8091e-8 kg; lognormal variance with pedigree 7.0397, pedigree (1,1,4,1,1)
  (same comment as for Antimony ion)
- Cadmium II [water, surface water]: 8.9436e-11 kg; lognormal variance with pedigree 1.3149, pedigree (1,1,4,1,1)
  (same comment as for Antimony ion)
- Chloride [water, ground-, long-term]: 0.0016622 kg; lognormal variance with pedigree 0.41455, pedigree (1,1,4,1,1)
  (same comment as for Antimony ion)
- Chloride [water, surface water]: 0.0055071 kg; lognormal variance with pedigree 0.33397, pedigree (1,1,4,1,1)
  (same comment as for Antimony ion)
- Chromium III [water, surface water]: 7.1748e-10 kg; lognormal variance with pedigree 1.3221, pedigree (1,1,4,1,1)
  (same comment as for Antimony ion)
- Chromium VI [water, ground-, long-term]: 8.4764e-7 kg; lognormal variance with pedigree 1.7444, pedigree (1,1,4,1,1)
  (same comment as for Antimony ion)
- Chromium VI [water, surface water]: 2.5825e-7 kg; lognormal variance with pedigree 1.3571, pedigree (1,1,4,1,1)
  (same comment as for Antimony ion)
- Cobalt II [water, ground-, long-term]: 7.4785e-7 kg; lognormal variance with pedigree 1.5017, pedigree (1,1,4,1,1)
  (same comment as for Antimony ion)
- Cobalt II [water, surface water]: 1.6633e-10 kg; lognormal variance with pedigree 1.8636, pedigree (1,1,4,1,1)
  (same comment as for Antimony ion)
- Copper ion [water, ground-, long-term]: 3.1364e-5 kg; lognormal variance with pedigree 1.09, pedigree (1,1,4,1,1)
  (same comment as for Antimony ion)
- Copper ion [water, surface water]: 4.5498e-9 kg; lognormal variance with pedigree 0.99422, pedigree (1,1,4,1,1)
  (same comment as for Antimony ion)
- DOC, Dissolved Organic Carbon [water, ground-, long-term]: 0.0012875 kg; lognormal variance with pedigree 0.030743, pedigree (1,1,4,1,1)
  (same comment as for Antimony ion)
- DOC, Dissolved Organic Carbon [water, surface water]: 0.00022134 kg; lognormal variance with pedigree 0.050096, pedigree (1,1,4,1,1)
  (same comment as for Antimony ion)
- Heat, waste [water, surface water]: 3.2455 MJ; lognormal variance with pedigree 0.055987, pedigree (1,1,4,1,1)
  (same comment as for Heat, waste)
- Lead II [water, ground-, long-term]: 1.4003e-5 kg; lognormal variance with pedigree 4.2748, pedigree (1,1,4,1,1)
  (same comment as for Antimony ion)
- Lead II [water, surface water]: 2.7705e-9 kg; lognormal variance with pedigree 0.95413, pedigree (1,1,4,1,1)
  (same comment as for Antimony ion)
- Manganese II [water, ground-, long-term]: 5.8728e-5 kg; lognormal variance with pedigree 1.9668, pedigree (1,1,4,1,1)
  (same comment as for Antimony ion)
- Manganese II [water, surface water]: 1.4818e-8 kg; lognormal variance with pedigree 0.84575, pedigree (1,1,4,1,1)
  (same comment as for Antimony ion)
- Mercury II [water, ground-, long-term]: 1.9191e-8 kg; lognormal variance with pedigree 3.2662, pedigree (1,1,4,1,1)
  (same comment as for Antimony ion)
- Mercury II [water, surface water]: 3.2723e-10 kg; lognormal variance with pedigree 1.2393, pedigree (1,1,4,1,1)
  (same comment as for Antimony ion)
- Nickel II [water, ground-, long-term]: 1.0213e-5 kg; lognormal variance with pedigree 1.2376, pedigree (1,1,4,1,1)
  (same comment as for Antimony ion)
- Nickel II [water, surface water]: 7.1491e-9 kg; lognormal variance with pedigree 1.8151, pedigree (1,1,4,1,1)
  (same comment as for Antimony ion)
- Nitrate [water, ground-, long-term]: 9.2921e-5 kg; lognormal variance with pedigree 0.54939, pedigree (1,1,4,1,1)
  (same comment as for Antimony ion)
- Nitrate [water, surface water]: 3.2933e-5 kg; lognormal variance with pedigree 0.38102, pedigree (1,1,4,1,1)
  (same comment as for Antimony ion)
- Selenium IV [water, ground-, long-term]: 2.0182e-6 kg; lognormal variance with pedigree 1.0416, pedigree (1,1,4,1,1)
  (same comment as for Antimony ion)
- Selenium IV [water, surface water]: 1.0497e-6 kg; lognormal variance with pedigree 1.1331, pedigree (1,1,4,1,1)
  (same comment as for Antimony ion)
- Strontium [water, ground-, long-term]: 4.495e-5 kg; lognormal variance with pedigree 1.0758, pedigree (1,1,4,1,1)
  (same comment as for Antimony ion)
- Strontium [water, surface water]: 2.8339e-8 kg; lognormal variance with pedigree 1.7879, pedigree (1,1,4,1,1)
  (same comment as for Antimony ion)
- Sulfate [water, ground-, long-term]: 0.0044007 kg; lognormal variance with pedigree 0.33573, pedigree (1,1,4,1,1)
  (same comment as for Antimony ion)
- Sulfate [water, surface water]: 0.00090137 kg; lognormal variance with pedigree 0.27823, pedigree (1,1,4,1,1)
  (same comment as for Antimony ion)
- TOC, Total Organic Carbon [water, ground-, long-term]: 0.0012875 kg; lognormal variance with pedigree 0.030743, pedigree (1,1,4,1,1)
  (same comment as for Antimony ion)
- TOC, Total Organic Carbon [water, surface water]: 0.00022134 kg; lognormal variance with pedigree 0.050096, pedigree (1,1,4,1,1)
  (same comment as for Antimony ion)
- Tin ion [water, ground-, long-term]: 2.5842e-6 kg; lognormal variance with pedigree 2.1748, pedigree (1,1,4,1,1)
  (same comment as for Antimony ion)
- Tin ion [water, surface water]: 1.7863e-10 kg; lognormal variance with pedigree 1.9549, pedigree (1,1,4,1,1)
  (same comment as for Antimony ion)
- Water [water, surface water]: 0.00047601 m3; lognormal variance with pedigree 1.9093, pedigree (1,1,4,1,1)
  Process water released to surface water.
  Uncertainty: uncertainty calculated from uncertainty in process water input and the uncertainty of fraction to surface water.
- Zinc II [water, ground-, long-term]: 1.926e-5 kg; lognormal variance with pedigree 3.1484, pedigree (1,1,4,1,1)
  (same comment as for Antimony ion)
- Zinc II [water, surface water]: 5.714e-9 kg; lognormal variance with pedigree 0.84701, pedigree (1,1,4,1,1)
  (same comment as for Antimony ion)
