# rhodium to generic market for metal catalyst for catalytic converter

Dataset: EcoSpold 2, unit process
Geography: GLO
Time period: 2019-01-01 to 2022-12-31
Technology level: current
Classification: ISIC rev.4 ecoinvent: 2420:Manufacture of basic precious and other non-ferrous metals
Scenario: Business-as-Usual
System model: Substitution, consequential, long-term
Generated by: David FitzGerald
Database: ecoinvent
isCopyrightProtected: true

## General comment
This activity links rhodium to the generic market for metal catalyst for catalytic converter. All metals that enter this market provide the function of a metal catalyst for use in a catalytic converter.
The product "metal catalyst for catalytic converter" should be used only in cases where the specific metal catalyst is not known. Three metals are commonly used as metal catalysts in catalytic converters: palladium, platinum and rhodium. Their function is to reduce the amount of toxic exhaust emissions from the combustion of fuels.

## Included activities start
The activity starts with the reception of rhodium.

## Included activities end
The activity ends with the renaming of rhodium to a generic metal catalyst, which supplies the market for metal catalyst for catalytic converter. As this is a renaming activity, no other inputs or outputs are included.

## Reference product
- rhodium: 1 kg; By-product classification allocatable product; CPC 4160: Other non-ferrous metals and articles thereof (including waste and scrap of some metals); cermets and articles […]; CAS 7440-16-6
  production volume 1 kg
  properties: carbon allocation 0 kg, carbon content 0, carbon content, fossil 0, carbon content, non-fossil 0, dry mass 1 kg, price 0 EUR2005, water content 0, water in wet mass 0 kg, wet mass 1 kg

## Inputs from technosphere
- metal catalyst for catalytic converter: 1 kg
  production volume
    The worldwide use of rhodium in catalytic converters amounted to 27000 kg in 2016 (USGS 2018).
    Reference:
    USGS (2018) 2016 Minerals Yearbook, Platinum-Group Metals. U.S. Department of the Interior, U.S. Geological Survey.
  properties: dry mass 1 kg, price 11835.9 EUR2005, wet mass 1 kg
