# cottonseed oil mill operation

Dataset: EcoSpold 2, unit process
Geography: RoW
Time period: 2012-01-01 to 2022-12-31
Technology level: current
Classification: EcoSpold01Categories: biomass/fuels
Classification: ISIC rev.4 ecoinvent: 1040:Manufacture of vegetable and animal oils and fats
Scenario: Business-as-Usual
System model: Substitution, consequential, long-term
Share of production covered: 0 %
Generated by: Tereza Levova
Database: ecoinvent
isCopyrightProtected: true

## General comment
This dataset models cottonseed oil mill operation partly based on data for rape oil mill operation. Cotton seed is a by-product from cotton fibre production. The mill has cotton seed as input (negative reference product) and produces cottonseed oil and cottonseed meal as output.

## Included activities start
The activity starts with the reception of cottonseeds.

## Included activities end
This activity represents processing of the seeds to cottonseed oil (using solvent extraction technique) and cottonseed meal. System boundary is at the oil mill. The activity ends with the cottonseed oil, crude and cottonseed meal being ready for transportation.

## Parameters
- fraction, process water, to air: 0.15 dimensionless; name fraction_PW_to_air; lognormal variance with pedigree 0.092025, pedigree (4,4,3,2,4)
  Literature value. In case when no industry/process specific data are available, default evaporation fraction value is used. This value is 15% and is based on literature (Statistics Canada, 2007 & Shaffer, K.H., 2008, Consumptive water use in the Great Lakes Basin, USGS & Shiklomanov, 2003, World Water Resources at the Beginning of the 21st Century) and has been approved by an expert.
- fraction, tap water, to air: 0.15 dimensionless; name fraction_TW_to_air; = fraction_PW_to_air; lognormal variance with pedigree 0.092025, pedigree (4,4,3,2,4)
  Calculated value. See comment in the other parametres present in this dataset. Tap water is considered to be always used as process water, thus process water fractions to air are applied to all tap water input flows to calculate the amount of water consumed in the processes.
- utilisation rate: 0.9 dimensionless; lognormal variance with pedigree 0.0086, pedigree (4,1,1,1,1)

## Reference product
- cottonseed oil, crude: 1 kg; name cottonseed_oil_crude_output_1; By-product classification allocatable product; CPC 21681: Cottonseed oil, crude
  Literature data from FAO (Animal Feed Resources Information System, http://www.fao.org/ag/aGa/agap/FRG/afris/Data/541.HTM).
  production volume 6.51387e9 kg
    Calculated from the total production volume of cottonseed in the databse.
  property heating value, net 38.4 MJ
    Values is approximated from HHV from "vegetable oil, crude". Source: Radovanovic,M.; Zivanovic,T.; Stojiljkovic,D.; Jovanovic,V.; Jerinic,N.; Knezevic,S. et.al. Utilization of sunflower husk as a fuel for industrial boilers - 20 years experience. Proc. 5th Eur. Conf. on Industrial Furnaces&Boilers 2000,vol.2,p.221-233.
    Available at: https://phyllis.nl/Biomass/View/2152
  property price 0.571 EUR2005
    Calculated value based on data from United Nations Commodity Trade Statistics Database (comtrade.un.org). UN comtrade category: 151221 Cotton-seed oil crude. Using exchange rate of 1EURO = 1.209 USD.
  properties: carbon allocation 0.612118 kg, carbon content 0.612118, carbon content, fossil 0, carbon content, non-fossil 0.612118, dry mass 1 kg, water content 0, water in wet mass 0 kg, wet mass 1 kg

## Inputs from technosphere
- activated bentonite: 0.00103978 kg; lognormal variance with pedigree 0.1318, pedigree (2,3,4,5,5)
  Estimated based on rape oil mill operation activity.
  EcoSpold01Location=DE
  Uncertainty: Data from literature survey (1998-2006) & biodiesel producers
  properties: dry mass 1 kg, wet mass 1 kg
- biowaste: -1.4869, -0.0130956 kg (2 suppliers, which the file names only by identifier); sum of these -1.5 kg; lognormal variance with pedigree 0.0113, pedigree (4,3,3,3,1)
  Literature data from FAO (Animal Feed Resources Information System, http://www.fao.org/ag/aGa/agap/FRG/afris/Data/541.HTM). This flow represent the hulls removed from the cotton seeds.
  production volume
    Calculated from production volume of reference product using the relative outputs.
  properties: carbon content, non-fossil 0.406, dry mass 0.4 kg, heating value, net 4.29 MJ, water content 1.5, wet mass 1 kg
  note on heating value, net: Value taken from the general comment of the treatment dataset.
- cottonseed: 2.5, 2.5 kg (2 suppliers, which the file names only by identifier); sum of these 5 kg; lognormal variance with pedigree 0.0492, pedigree (4,3,5,1,1)
  (same comment as for cottonseed oil, crude)
  properties: carbon content, non-fossil 0.475, dry mass 0.923 kg, water content 0.0834236, wet mass 1 kg
  note on carbon content, non-fossil: Biogenic carbon content of vegetation on a dry mass basis (47.5% DM) derived from FAOSTAT. Reference: http://www.fao.org/forestry/17111/en
- cottonseed meal: -3 kg; name csm; lognormal variance with pedigree 0.0113, pedigree (4,3,3,3,1)
  Literature data from USDA (http://usda.mannlib.cornell.edu/MannUsda/viewStaticPage.do?url=http://usda.mannlib.cornell.edu/usda/ers/89002/2006/index.html) the ratio between cotton seed oil, crude produced and cotton seed meal is 4.67/14.24, i.e. per every 1 kg of cotton seed oil, crude produced 3 kg of cotton meal is produced as a by-product.
  production volume
    Calculated from production volume of reference product using the relative outputs.
  properties: carbon content, non-fossil 0.422797, dry mass 0.9 kg, price 0.127 EUR2005, water content 0.111111, wet mass 1 kg
  note on carbon content, non-fossil: Composition data obtained from Table 2 in Uses of Canola Meal, J. Bonnardeaux, Department of Agriculture and Food, Western Australia, 2007. First, composition data were refered to 1 kg dry mass. Then, C-contents were calculated considering a C-content/dry mass of 46% in carbohydrates (including fibres), 53% in proteins and 75% in fats. All data from "Evolutionary and Biochemical Aspects", A.D. Kay and T. Vrede (in Global Ecology, 2010, Elsevier B.V., S.E. Jørgensen Ed.). The composition of cottonseed meal is taken from the "Feed Composition Tables 2011".
- electricity, medium voltage: 0.0152742, 0.0022556, 0.000180284, 0.00326959, 4.54205e-5, 5.18367e-5, 0.000370655, 0.0018832, 8.62569e-5, 0.000189742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 kWh (46 suppliers, which the file names only by identifier); sum of these 0.15352 kWh; lognormal variance with pedigree 0.1312, pedigree (2,1,4,5,5)
  EcoSpold01Location=UCTE
  Estimated based on rape oil mill operation activity.
  Uncertainty: Data from literature survey (1998-2006) & biodiesel producers
- heat, district or industrial, natural gas: 0.314081 MJ; lognormal variance with pedigree 0.1312, pedigree (2,1,4,5,5)
  EcoSpold01Location=RER
  Estimated based on rape oil mill operation activity.
  Uncertainty: Data from literature survey (1998-2006) & biodiesel producers
  properties: heating value, net 1 MJ
- hexane: 0.000487069 kg; lognormal variance with pedigree 0.1313, pedigree (2,2,4,5,5)
  (same comment as for heat, district or industrial, natural gas)
  properties: carbon content, fossil 0.837209, dry mass 1 kg, heating value, net 45.02 MJ, wet mass 1 kg
- oil mill: 1.0101e-9 unit; = 1/(lifetime_capacity_kg*utilization_rate); lognormal variance with pedigree 0.1326, pedigree (1,4,4,5,5)
  Calculated from the utilization rate of the oil mill using 90% utilization rate.
  Uncertainty: Calculation, according to feed capacity and lifetime of the plant
  property lifetime capacity [kg] 1.1e9 kg; name lifetime_capacity_kg; = 22000000*50
- phosphoric acid, industrial grade, without water, in 85% solution state: 0.000934051 kg; lognormal variance with pedigree 0.1313, pedigree (2,2,4,5,5)
  Estimated based on rape oil mill operation activity.
  EcoSpold01Location=RER
  Uncertainty: Data from literature survey (1998-2006) & biodiesel producers
  properties: dry mass 1 kg, wet mass 1 kg
- tap water: 6.43895e-5, 0.000323669, 0.000120148, 1.08295e-6, 4.22388e-5, 0.000390553, 0.000466432 kg (7 suppliers, which the file names only by identifier); sum of these 0.00140851 kg; lognormal variance with pedigree 0.090625, pedigree (4,4,5,2,4)
  Estimated. The amount of added tap water is equal to the amount of wastewater and losses (water to air).
  properties: carbon content, fossil 0.00178991, dry mass 0.000337476 kg, water content 2962.17, wet mass 1 kg
  note on carbon content, fossil: Bicarbonate content is 2.93 mol/m3. CO2 content is 0.1 mol/m3 (ecoinvent v2.2 report 8, Tab 93.1).
- wastewater from vegetable oil refinery: -1.19724e-6 m3; name sewage_from_residence; lognormal variance with pedigree 0.21, pedigree (5,5,1,5,5)
  Estimated based on rape oil mill operation activity.
  production volume
    Calculated from production volume of reference product using the relative outputs.
  properties: carbon content, non-fossil 0.993118, dry mass 0.871801 kg, water content 1146.05, wet mass 1000 kg

## Inputs from nature
- Carbon dioxide, in air [natural resource, in air]: 2.38002 kg; lognormal variance with pedigree 0.1306, pedigree (1,1,4,5,5)
  Estimated based on rape oil mill operation activity.
  Uncertainty: Correction to close carbon balance of individual outputs

## Emissions to nature
- Carbon dioxide, non-fossil [air, urban air close to ground]: 2.39836 kg; lognormal variance with pedigree 0.1306, pedigree (1,1,4,5,5)
  (same comment as for Carbon dioxide, in air)
- Hexane [air, urban air close to ground]: 0.000487069 kg; lognormal variance with pedigree 0.17, pedigree (1,1,4,5,5)
  Estimated based on rape oil mill operation activity.
  Uncertainty: Emissions are taken to be equal to input of gas
- Water [air, unspecified]: 2.11277e-7 m3; name water_to_air_unspecified; = (tap_water_input/1000)*fraction_TW_to_air; lognormal variance with pedigree 0.130025, pedigree (4,4,5,2,4)
  Calculated value based on literature values and expert opinion. See comments in the parametres' comment field.
  property fraction, origin: fresh water 1; name fraction_origin_fresh_water
  property fraction, origin: salt water 0; name fraction_origin_salt_water
  property fraction, origin: unspecified 0; name fraction_origin_unspecified

## Review by Bo Weidema 2012-03-14
Production volumes are for 2005, even though the dataset is indicated to be valid for 2012.
