# soybean production

Dataset: EcoSpold 2, unit process
Geography: RoW
Time period: 2004-01-01 to 2022-12-31
Technology level: current
Classification: ISIC rev.4 ecoinvent: 0111:Growing of cereals (except rice), leguminous crops and oil seeds
Scenario: Business-as-Usual
System model: Substitution, consequential, long-term
Share of production covered: 100 %
Generated by: Jürgen Sutter
Published in: Jungbluth N. 2007
Database: ecoinvent
isCopyrightProtected: true

## General comment
This dataset represents the production of 1 kg of soy beans (fresh matter). The amounts of flows are weighted averages over all existing local crop production datasets available for this specific product. The weights are the annual production volumes of the local datasets relative to the sum of all local annual production volumes. The locations of considered datasets in the averaging prodecure for this global dataset are Brazil and USA. For references refer to the respective local datasets.

[This dataset was already contained in the ecoinvent database version 2. It was not individually updated during the transfer to ecoinvent version 3. Life Cycle Impact Assessment results may still have changed, as they are affected by changes in the supply chain, i.e. in other datasets. This dataset was generated following the ecoinvent quality guidelines for version 2. It may have been subject to central changes described in the ecoinvent version 3 change report (http://www.ecoinvent.org/database/ecoinvent-version-3/reports-of-changes/), and the results of the central updates were reviewed extensively. The changes added e.g. consistent water flows and other information throughout the database. The documentation of this dataset can be found in the ecoinvent reports of version 2, which are still available via the ecoinvent website. The change report linked above covers all central changes that were made during the conversion process.]
This activity was adapted to include the global average land use change (LUC) emissions according 2nd edition of the Quantis-modified tool developed by Blonk Consultants 'WFLDB-adapted-Blonk 2014 direct-land-use-change-assessment-tool_2015-05-18a.xlsx', tab. 'Country & land use unknown'. The size of the emission depends on (i) the relative crop expansion in all countries of the crop during the last 20 years and (ii) the corresponding, country specific land transformations. The current results are based on the average FAOSTAT data (harvested area) of 2009-2011 and 1989-1991. The weighted average is used which takes into account relative difference in crop expansion into primary forest, secondary forest, grassland, perennial and annual land.

## Included activities start
This activity starts after the harvest of the previous crop. The inputs of seeds, mineral fertilisers and pesticides are considered. It is assumed that no organic fertilisers are applied.

## Included activities end
The dataset includes all machine operations and corresponding machine infrastructure and sheds. Machine operations are: soil cultivation, sowing, fertilisation, weed control, pest and pathogen control, combine-harvest and transport from field to farm (15 km). Further, direct field emissions are included. This activity ends after harvest at the farm gate.

## Geography
The inventory is modelled as GLO. Data is extrapolated from the USA and BR.

## Technology
Cultivation of soybeans

## Time period
Time of publications

## Parameters
- annual yield, agriculture: 2.6 metric ton/(ha*year)
- land transformation to: 3.84615 m2/kg; name T_t; = UnitConversion(1, 'ha', 'm2')/(yield_agriculture*UnitConversion(1, 'metric ton', 'kg'))
  Calculated value: m2 per hectare divided by yield.
- production volume country 01: 2.6816e10 dimensionless; name PV_01_BR
  Literature value (FAOSTAT). Total production in Brazill is around 50 Million tons.
- production volume country 02: 4.626e10 dimensionless; name PV_02_US
  Literature value. Total soybeans crushed: 46.26 million metric tons. Source: National Oilseed Processors Association (NOPA), 2010.
- production volume sum: 7.3076e10 dimensionless; name PV_SUM; = PV_01_BR+PV_02_US
  Calculated value.

## Reference product
- soybean: 1 kg; name REF_PRODUCT; By-product classification allocatable product; CPC 01412: Soya beans, other
  EcoSpold01Location=BR
  production volume 7.59932e10 kg
    Global Production volume as reported in FAOSTAT for "soybeans".
    Reference:
    FAOSTAT, accessed at: http://www.fao.org/faostat/en/#data/QC on 09/04/2018.
  property carbon content, fossil 0; name REF_PRODUCT_C_content_fossil
    fossil carbon content on a dry matter basis
  property carbon content, non-fossil 0.435955; name REF_PRODUCT_C_content_non_fossil
    biogene carbon content on a dry matter basis
  property energy content 20.4522 MJ; name REF_PRODUCT_energy_content
    See chapter 'Product Properties' in "01_crop production - yields & inputs CH & Europe_v1.0.pdf", section "AGRICULTURAL PRODUCTION IN SWITZERLAND" - pdf-document on the dedicated talk page of ecoinvent (www.ecoinvent.org/documentation)
  property price 0.239 EUR2005
    Calculated value based on data from United Nations Commodity Trade Statistics Database (comtrade.un.org). UN comtrade category: 1201 Soya beans. Using exchange rate of 1EURO = 1.209 USD. Average of price of import into 5 main markets (EU, US, JP, IN and CN).
  property water content 0.123596; name REF_PRODUCT_water_content; = (1-REF_PRODUCT_DM)/REF_PRODUCT_DM
  property water in wet mass 0.11 kg; name REF_PRODUCT_WWM; = 1-REF_PRODUCT_DM
  properties: carbon allocation 0.388 kg, carbon content 0.435955, dry mass 0.89 kg, wet mass 1 kg

## Inputs from technosphere
- [sulfonyl]urea-compound: 9.77492e-5 kg; lognormal variance with pedigree 0.0646, pedigree (3,3,5,5,1)
  Averaged from local datasets. See general comment.
  EcoSpold01Location=RER
  Uncertainty: Cederberg 2001
  properties: carbon content, fossil 0.54085, dry mass 1 kg, wet mass 1 kg
- [thio]carbamate-compound: 1.57999e-7 kg; lognormal variance with pedigree 0.0421, pedigree (1,2,5,5,1)
  Averaged from local datasets. See general comment.
  EcoSpold01Location=RER
  Uncertainty: USDA 2004
  properties: carbon content, fossil 0.62635, dry mass 1 kg, wet mass 1 kg
- acetamide-anillide-compound, unspecified: 3.36445e-6 kg; lognormal variance with pedigree 0.0421, pedigree (1,2,5,5,1)
  EcoSpold01Location=RER
  Averaged from local datasets. See general comment.
  Uncertainty: USDA 2004
  properties: carbon content, fossil 0.65917, dry mass 1 kg, wet mass 1 kg
- ammonia, anhydrous, liquid: 3.88745e-6, 0.000142871, 1.73783e-5, 1.15081e-5, 0.000411121 kg (5 suppliers, which the file names only by identifier); sum of these 0.000586766 kg; lognormal variance with pedigree 0.0421, pedigree (1,2,5,5,1)
  Averaged from local datasets. See general comment.
  EcoSpold01Location=RER
  Uncertainty: IFA 2006; NASS 2005
  properties: dry mass 1 kg, wet mass 1 kg
- ammonium nitrate: 0.000750492, 0.000221462 kg (2 suppliers, which the file names only by identifier); sum of these 0.000971954 kg; lognormal variance with pedigree 0.0421, pedigree (1,2,5,5,1)
  The exchange has been updated from 'ammonium nitrate, as N' into 'ammonium nitrate' and therefore its amount has been scaled (multiplied) from 0.0003 kg by 2.8573 kg of 'ammonium nitrate' per kg of 'ammonium nitrate, as N'. Original comment of the exchange is: Averaged from local datasets. See general comment.
  EcoSpold01Location=RER
  Uncertainty: IFA 2006; NASS 2005
  properties: dry mass 1 kg, wet mass 1 kg
- application of plant protection product, by field sprayer: 0.000271737 ha; lognormal variance with pedigree 0.0546, pedigree (3,3,5,5,1)
  Averaged from local datasets. See general comment.
  EcoSpold01Location=CH
  Uncertainty: Cederberg 2001; Ostermayer 2007
- benzimidazole-compound: 5.26044e-7 kg; lognormal variance with pedigree 0.0421, pedigree (1,2,5,5,1)
  (same comment as for acetamide-anillide-compound, unspecified)
  properties: carbon content, fossil 0.52967, dry mass 1 kg, wet mass 1 kg
- benzo[thia]diazole-compound: 1.89599e-6 kg; lognormal variance with pedigree 0.0421, pedigree (1,2,5,5,1)
  (same comment as for [thio]carbamate-compound)
  properties: carbon content, fossil 0.49987, dry mass 1 kg, wet mass 1 kg
- combine harvesting: 0.000113228 ha; lognormal variance with pedigree 0.0546, pedigree (3,3,5,5,1)
  EcoSpold01Location=CH
  Averaged from local datasets. See general comment.
  Uncertainty: Cederberg 2001; Ostermayer 2007
- dinitroaniline-compound: 2.13764e-5 kg; lognormal variance with pedigree 0.0421, pedigree (1,2,5,5,1)
  (same comment as for acetamide-anillide-compound, unspecified)
  properties: carbon content, fossil 0.55516, dry mass 1 kg, wet mass 1 kg
- diphenylether-compound: 2.62712e-7 kg; lognormal variance with pedigree 0.0421, pedigree (1,2,5,5,1)
  (same comment as for [thio]carbamate-compound)
  properties: carbon content, fossil 0.56006, dry mass 1 kg, wet mass 1 kg
- fertilising, by broadcaster: 5.70377e-5 ha; lognormal variance with pedigree 0.0546, pedigree (3,3,5,5,1)
  (same comment as for combine harvesting)
- inorganic phosphorus fertiliser, as P2O5: 2.51137e-6, 5.87319e-5, 7.47248e-5, 1.92919e-5, 3.19629e-6, 5.74191e-6, 4.94284e-6, 5.76474e-6, 9.98842e-6, 4.17002e-5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 kg (58 suppliers, which the file names only by identifier); sum of these 0.00805621 kg; lognormal variance with pedigree 0.0446, pedigree (3,3,5,5,1)
  Averaged from local datasets. See general comment.
  EcoSpold01Location=RER
  Uncertainty: FAO 2004
  properties: dry mass 1 kg, wet mass 1 kg
- lime: 0.0051737 kg; lognormal variance with pedigree 0.0421, pedigree (1,2,5,5,1)
  Averaged from local datasets. See general comment.
  EcoSpold01Location=CH
  Uncertainty: NREL 2006
  properties: carbon content, fossil 0.12, dry mass 1 kg, wet mass 1 kg
- organophosphorus-compound, unspecified: 0.00026169 kg; lognormal variance with pedigree 0.0646, pedigree (3,3,5,5,1)
  EcoSpold01Location=RER
  Averaged from local datasets. See general comment.
  Uncertainty: Cederberg 2001
  properties: carbon content, fossil 0.2609, dry mass 1 kg, wet mass 1 kg
- packaging, for fertilisers: 0.0497949 kg; lognormal variance with pedigree 0.0912, pedigree (4,3,5,5,4)
  Total amount of active substance/s of fertilisers needed for the production of 'soybean' is calculated to be circa 2.49E-02 kg. Fertiliser/s used in this dataset is/are: 'ammonia, liquid', 'ammonium nitrate, as N', 'lime', 'phosphate fertiliser, as P2O5', 'phosphate rock, as P2O5, beneficiated, dry', 'potassium chloride, as K2O', 'urea, as N'. The total amount of active substance/s is doubled in order to account for the packaging of the dilluted product of fertiliser/s that is/are applied. Therefore, 4.98E-02 kg of packaging for fertilisers is justified with this exchange.
  properties: carbon content, fossil 0.825301, dry mass 1 kg, heating value, net 25.01 MJ, price 0.0642 EUR2005, wet mass 1 kg
  note on carbon content, fossil: Considering a chemical formula (C2H4)n for polyethylene, carbon content-fossil is calculated to be 0.856286 kg of Carbon per kg of dry mass.
- packaging, for pesticides: 0.0016881 kg; lognormal variance with pedigree 0.0912, pedigree (4,3,5,5,4)
  Total amount of active substance/s of pesticides needed for the production of soybean is calculated to be circa 8.44E-04 kg. Pesticide/s used in this dataset is/are: '[sulfonyl]urea-compound', '[thio]carbamate-compound', 'acetamide-anillide-compound, unspecified', 'benzimidazole-compound', 'benzo[thia]diazole-compound', 'dinitroaniline-compound', 'diphenylether-compound', 'organophosphorus-compound, unspecified', 'pesticide, unspecified', 'phenoxy-compound', 'pyrethroid-compound', 'triazine-compound, unspecified'. The total amount of active substance/s is doubled in order to account for the packaging of the dilluted product of pesticide/s that is/are applied. Therefore, 1.69E-03 kg of packaging for pesticides is justified with this exchange.
  properties: carbon content, fossil 0.85714, dry mass 1 kg, heating value, net 25.97 MJ, price 0.0642 EUR2005, wet mass 1 kg
- pesticide, unspecified: 0.000338685 kg; = (2.59E-05*PV_01_BR+(0.52/1000* PV_02_US))/ PV_SUM; lognormal variance with pedigree 0.0646, pedigree (3,3,5,5,1)
  (same comment as for organophosphorus-compound, unspecified)
  properties: carbon content, fossil 0.48698, dry mass 1 kg, wet mass 1 kg
- phenoxy-compound: 0.000116845 kg; lognormal variance with pedigree 0.0646, pedigree (3,3,5,5,1)
  (same comment as for [sulfonyl]urea-compound)
  properties: carbon content, fossil 0.53256, dry mass 1 kg, wet mass 1 kg
- phosphate rock, beneficiated: 0.000692165, 9.18906e-6 kg (2 suppliers, which the file names only by identifier); sum of these 0.000701354 kg; lognormal variance with pedigree 0.0446, pedigree (3,3,5,5,1)
  The exchange has been updated from 'phosphate rock, as P2O5, beneficiated, dry' into 'phosphate rock, beneficiated' and therefore its amount has been scaled (multiplied) from 0.0002 kg by 3.125 kg of 'phosphate rock, beneficiated' per kg of 'phosphate rock, as P2O5, beneficiated, dry'. Original comment of the exchange is: Averaged from local datasets. See general comment.
  EcoSpold01Location=MA
  Uncertainty: FAO 2004
  properties: dry mass 1 kg, wet mass 1 kg
- potassium chloride: 0.0162557 kg; lognormal variance with pedigree 0.0446, pedigree (3,3,5,5,1)
  The exchange has been updated from 'potassium chloride, as K2O' into 'potassium chloride' and therefore its amount has been scaled (multiplied) from 0.0103 kg by 1.5829 kg of 'potassium chloride' per kg of 'potassium chloride, as K2O'. Original comment of the exchange is: Averaged from local datasets. See general comment.
  EcoSpold01Location=RER
  Uncertainty: FAO 2004
  properties: dry mass 1 kg, wet mass 1 kg
- pyrethroid-compound: 5.26044e-8 kg; lognormal variance with pedigree 0.0421, pedigree (1,2,5,5,1)
  Averaged from local datasets. See general comment.
  EcoSpold01Location=CH
  Uncertainty: USDA 2004
  properties: carbon content, fossil 0.623, dry mass 1 kg, wet mass 1 kg
- sowing: 0.000217314 ha; lognormal variance with pedigree 0.0546, pedigree (3,3,5,5,1)
  EcoSpold01Location=CH
  Averaged from local datasets. See general comment.
  Uncertainty: Cederberg 2001; Ostermayer 2006
- soybean seed, for sowing: 0.0417 kg; name SEED; lognormal variance with pedigree 0.0712, pedigree (2,3,5,5,3)
  Averaged from local datasets. See general comment.
  Uncertainty: Nemecek 2004
  property carbon content, non-fossil 0.435955; name SEED_C_content_non_fossil
  property energy content 20.4522 MJ; name SEED_energy_content
  properties: dry mass 0.89 kg, water content 0.123596, wet mass 1 kg
  note on carbon content, non-fossil: biogene carbon content on a dry matter basis; In ecoinvent report n 17, pg 125: C content of soybeans=0.388kg/kg fresh matter
  note on energy content: See chapter 'Product Properties' in "01_crop production - yields & inputs CH & Europe_v1.0.pdf", section "AGRICULTURAL PRODUCTION IN SWITZERLAND" - pdf-document on the dedicated talk page of ecoinvent (www.ecoinvent.org/documentation)
- tillage, harrowing, by spring tine harrow: 0.000316781 ha; lognormal variance with pedigree 0.0546, pedigree (3,3,5,5,1)
  (same comment as for application of plant protection product, by field sprayer)
- tillage, ploughing: 9.90863e-5 ha; lognormal variance with pedigree 0.0546, pedigree (3,3,5,5,1)
  (same comment as for application of plant protection product, by field sprayer)
- transport, tractor and trailer, agricultural: 0.0152663 metric ton*km; lognormal variance with pedigree 0.268, pedigree (4,5,5,5,5)
  EcoSpold01Location=CH
  Averaged from local datasets. See general comment.
  Uncertainty: Standard Distances
- triazine-compound, unspecified: 1.44368e-6 kg; lognormal variance with pedigree 0.0421, pedigree (1,2,5,5,1)
  (same comment as for acetamide-anillide-compound, unspecified)
  properties: carbon content, fossil 0.47562, dry mass 1 kg, wet mass 1 kg
- urea: 0.00028516, 0.000243506 kg (2 suppliers, which the file names only by identifier); sum of these 0.000528667 kg; lognormal variance with pedigree 0.0421, pedigree (1,2,5,5,1)
  The exchange has been updated from 'urea, as N' into 'urea' and therefore its amount has been scaled (multiplied) from 0.0002 kg by 2.1438 kg of 'urea' per kg of 'urea, as N'. Original comment of the exchange is: Averaged from local datasets. See general comment.
  EcoSpold01Location=RER
  Uncertainty: IFA 2006; NASS 2005
  properties: carbon content, fossil 0.2, dry mass 1 kg, wet mass 1 kg

## Inputs from nature
- Carbon dioxide, in air [natural resource, in air]: 1.36334 kg; = 44/12 * (REF_PRODUCT_C_content_non_fossil * REF_PRODUCT * REF_PRODUCT_DM - SEED_C_content_non_fossil * SEED * SEED_DM); lognormal variance with pedigree 0.0606, pedigree (4,3,5,5,1)
  Averaged from local datasets. See general comment.
  Uncertainty: calculated from the carbon balance
- Energy, gross calorific value, in biomass [natural resource, biotic]: 20.5 MJ; lognormal variance with pedigree 0.0515682, pedigree (4,3,5,1,1)
- Occupation, annual crop, non-irrigated, intensive [natural resource, land]: 1.92308 m2*year; = T_t*(6/12); lognormal variance with pedigree 0.08, pedigree (1,1,5,1,1)
  Averaged from local datasets. See general comment.
- Transformation, from annual crop [natural resource, land]: 3.84615 m2; = T_t; lognormal variance with pedigree 0.16, pedigree (1,1,5,1,1)
  Averaged from local datasets. See general comment.
- Transformation, to annual crop, non-irrigated, intensive [natural resource, land]: 3.84615 m2; = T_t; lognormal variance with pedigree 0.16, pedigree (1,1,5,1,1)
  Averaged from local datasets. See general comment.

## Emissions to nature
- Ammonia [air, non-urban air or from high stacks]: 7.0851e-5 kg; lognormal variance with pedigree 0.0706, pedigree (4,3,5,5,1)
  Averaged from local datasets. See general comment.
  Uncertainty: Calculated with standard method
- Carbon dioxide, from soil or biomass stock [air, non-urban air or from high stacks]: 4.58222 kg; normal variance with pedigree 0.5072, pedigree (3,3,5,5,2)
  Global average LUC emissions according 2nd edition of the Quantis-modified tool developed by Blonk Consultants 'WFLDB-adapted-Blonk 2014 direct-land-use-change-assessment-tool_2015-05-18a.xlsx', tab. 'Country & land use unknown'. The emission are based on the relative change in production areas in all countries for a given crop. The weighted average is used which takes into acount relative difference in crop expansion into primary forest, secondary forest, grassland, perennial and annual land.
  Uncertainty: Uncertainty estimated based on IPCC 2006
- Dinitrogen monoxide [air, non-urban air or from high stacks]: 0.00071351 kg; name N2O; lognormal variance with pedigree 0.1006, pedigree (4,3,5,5,1)
  (same comment as for Ammonia)
  property carbon content, fossil 0; name N2O_C_content_fossil
  property carbon content, non-fossil 1; name N2O_C_content_non_fossil
  property water content 0; name N2O_water_content
  property water in wet mass 0 kg; name N2O_WWM
- Nitrogen oxides [air, non-urban air or from high stacks]: 0.000149837 kg; = N2O*0.21
  Averaged from local datasets. See general comment.
- 2,4-D [soil, agricultural]: 0.000116132 kg; lognormal variance with pedigree 0.0706, pedigree (4,3,5,5,1)
  Averaged from local datasets. See general comment.
  Uncertainty: Calculated from the pesticide application
  property carbon content, fossil 0.43471; name C_content_fossil
  property carbon content, non-fossil 0; name C_content_non_fossil
  property water content 0; name water_content
  property water in wet mass 0 kg; name WWM
- Cadmium II [soil, agricultural]: 1.11217e-7 kg; lognormal variance with pedigree 0.1006, pedigree (4,3,5,5,1)
  Averaged from local datasets. See general comment.
  Uncertainty: Calculated from the fertilizer application
- Chlorimuron-ethyl [soil, agricultural]: 3.68045e-7 kg; lognormal variance with pedigree 0.0606, pedigree (4,3,5,5,1)
  (same comment as for 2,4-D)
- Chlorpyrifos [soil, agricultural]: 1.18345e-6 kg; lognormal variance with pedigree 0.0606, pedigree (4,3,5,5,1)
  (same comment as for 2,4-D)
- Chromium III [soil, agricultural]: 6.69647e-7 kg; lognormal variance with pedigree 0.1006, pedigree (4,3,5,5,1)
  (same comment as for Cadmium II)
- Clethodim [soil, agricultural]: 5.26044e-7 kg; lognormal variance with pedigree 0.0606, pedigree (4,3,5,5,1)
  (same comment as for 2,4-D)
- Cloransulam-methyl [soil, agricultural]: 1.57999e-7 kg; lognormal variance with pedigree 0.0606, pedigree (4,3,5,5,1)
  (same comment as for 2,4-D)
- Copper ion [soil, agricultural]: -1.25337e-5 kg
  Averaged from local datasets. See general comment.
- Diflubenzuron [soil, agricultural]: 8.06438e-5 kg; lognormal variance with pedigree 0.0706, pedigree (4,3,5,5,1)
  (same comment as for 2,4-D)
- Endosulfan [soil, agricultural]: 1.67374e-5 kg; lognormal variance with pedigree 0.0706, pedigree (4,3,5,5,1)
  (same comment as for 2,4-D)
- Fenoxaprop [soil, agricultural]: 3.15379e-7 kg; lognormal variance with pedigree 0.0606, pedigree (4,3,5,5,1)
  (same comment as for 2,4-D)
- Fluazifop-P-butyl [soil, agricultural]: 1.05333e-7 kg; lognormal variance with pedigree 0.0606, pedigree (4,3,5,5,1)
  (same comment as for 2,4-D)
- Flumioxazin [soil, agricultural]: 1.84023e-7 kg; lognormal variance with pedigree 0.0606, pedigree (4,3,5,5,1)
  (same comment as for 2,4-D)
- Fomesafen [soil, agricultural]: 1.20823e-6 kg; lognormal variance with pedigree 0.0606, pedigree (4,3,5,5,1)
  (same comment as for 2,4-D)
- Glyphosate [soil, agricultural]: 0.000252396 kg; lognormal variance with pedigree 0.0706, pedigree (4,3,5,5,1)
  (same comment as for 2,4-D)
- Imazamox [soil, agricultural]: 1.57999e-7 kg; lognormal variance with pedigree 0.0606, pedigree (4,3,5,5,1)
  (same comment as for 2,4-D)
- Imazethapyr [soil, agricultural]: 3.94688e-7 kg; lognormal variance with pedigree 0.0606, pedigree (4,3,5,5,1)
  (same comment as for 2,4-D)
- Lambda-cyhalothrin [soil, agricultural]: 5.26044e-8 kg; lognormal variance with pedigree 0.0606, pedigree (4,3,5,5,1)
  (same comment as for 2,4-D)
- Lead II [soil, agricultural]: 8.34433e-7 kg; lognormal variance with pedigree 0.1006, pedigree (4,3,5,5,1)
  (same comment as for Cadmium II)
- Metolachlor [soil, agricultural]: 3.36445e-6 kg; lognormal variance with pedigree 0.0606, pedigree (4,3,5,5,1)
  (same comment as for 2,4-D)
- Metribuzin [soil, agricultural]: 1.26399e-6 kg; lognormal variance with pedigree 0.0606, pedigree (4,3,5,5,1)
  (same comment as for 2,4-D)
- Monocrotophos [soil, agricultural]: 9.85224e-6 kg; lognormal variance with pedigree 0.0706, pedigree (4,3,5,5,1)
  (same comment as for 2,4-D)
- Nickel II [soil, agricultural]: -4.02698e-6 kg
  Averaged from local datasets. See general comment.
- Pendimethalin [soil, agricultural]: 9.17015e-6 kg; lognormal variance with pedigree 0.0606, pedigree (4,3,5,5,1)
  (same comment as for 2,4-D)
- Sulfentrazone [soil, agricultural]: 1.89599e-6 kg; lognormal variance with pedigree 0.0606, pedigree (4,3,5,5,1)
  (same comment as for 2,4-D)
- Sulfosate [soil, agricultural]: 7.80702e-6 kg; lognormal variance with pedigree 0.0606, pedigree (4,3,5,5,1)
  (same comment as for 2,4-D)
- Trifluralin [soil, agricultural]: 1.1029e-5 kg; lognormal variance with pedigree 0.0606, pedigree (4,3,5,5,1)
  (same comment as for 2,4-D)
- Zinc II [soil, agricultural]: -3.77925e-5 kg
  Averaged from local datasets. See general comment.
- Nitrate [water, ground-]: 0.0464729 kg; lognormal variance with pedigree 0.1006, pedigree (4,3,5,5,1)
  Averaged from local datasets. See general comment.
  Uncertainty: Ostermayer 2002
- Phosphorus [water, ground-]: 2.68804e-5 kg; lognormal variance with pedigree 0.1006, pedigree (4,3,5,5,1)
  (same comment as for Ammonia)
- Phosphorus [water, surface water]: 0.000306326 kg; lognormal variance with pedigree 0.1006, pedigree (4,3,5,5,1)
  (same comment as for Ammonia)

## Review by Niels Jungbluth 2009-01-28
Passed.
none

## Review by Emilia Moreno Ruiz 2013-01-22
correction of the amount of the exchange pesticide, unspecified
