# molasses, from sugar beet, to generic market for energy feed

Dataset: EcoSpold 2, unit process
Geography: GLO
Time period: 2012-01-01 to 2022-12-31
Technology level: current
Classification: ISIC rev.4 ecoinvent: 1080:Manufacture of prepared animal feeds
Scenario: Business-as-Usual
System model: Substitution, consequential, long-term
Generated by: Tereza Levova
Database: ecoinvent
isCopyrightProtected: true

## General comment
This is a linking activity that converts molasses, from sugar beet into gross energy for the feed market and protein, 100% crude for the feed market.
The naming of the dataset is based on the feed nomenclature system of the National Research Council (USA). Products with less than 20 percent of protein are classified as energy feeds. Products with more than 20 percent of protein are classified as protein feeds.

## Included activities start
The activity starts with the reception of molasses, from sugar beet

## Included activities end
The activity ends with the conversion of molasses, from sugar beet into gross energy and crude protein

## Reference product
- molasses, from sugar beet: 1 kg; name molasses; By-product classification allocatable product; CPC 23540: Molasses
  production volume 1 kg
  properties: carbon allocation 0.324654 kg, carbon content 0.39592, carbon content, fossil 0, carbon content, non-fossil 0.39592, dry mass 0.82 kg, price 0 EUR2005, water content 0.219512, water in wet mass 0.18 kg, wet mass 1 kg

## Inputs from technosphere
- energy feed, gross: 0.601398, 12.5104 MJ (2 suppliers, which the file names only by identifier); sum of these 13.1118 MJ; = 15.99* molasses*0.82; source Agroscope 2011
  Calculated based on gross energy of molasses from sugar beet (15.99MJ/kg dry mass). The dry mass of the reference product is 0.82kg/kg.
  production volume
    Calculated from production volume of molasses, from sugar beet, 8989300000 kg.
  properties: dry mass 1 kg, price 0.0108 EUR2005, wet mass 1 kg
- protein feed, 100% crude: 0.0902 kg; name protein_output; = 0.11* molasses*0.82; source Agroscope 2011; lognormal variance with pedigree 0.0026, pedigree (3,1,1,1,1)
  Calculated based on crude protein content of molasses from sugar beet (0.11kg/kg dry mass). The dry mass of the reference product is 0.82kg/kg.
  production volume
    Calculated from production volume of molasses, from sugar beet, 8989300000 kg.
  properties: carbon content, non-fossil 0.53, dry mass 1 kg, price 0.424 EUR2005, wet mass 1 kg
  note on carbon content, non-fossil: considered pure protein (ecoinvent v2.2 report 17, pg 288). C-content in protein is estimated to be 53% ( from "Evolutionary and Biochemical Aspects", A.D. Kay and T. Vrede (in Global Ecology, 2010, Elsevier B.V., S.E. Jørgensen Ed.).

## Sampling procedure
inventory based on gross energy and protein composition of raw material. Data obtained from Agroscope database of feedstuff compositions.

## Review by Bo Weidema 2012-03-14
Production volumes are for 2005, even though the dataset is indicated to be valid for 2012.
