# electricity, from municipal waste incineration to generic market for electricity, medium voltage

Dataset: EcoSpold 2, unit process
Geography: RoW
Time period: 2012-01-01 to 2022-12-31
Technology level: current
Classification: ISIC rev.4 ecoinvent: 3510:Electric power generation, transmission and distribution
Synonyms: waste-to-energy; WTE
Scenario: Business-as-Usual
System model: Substitution, consequential, long-term
Generated by: Karin Treyer
Published in: Doka G. 2013
Database: ecoinvent
isCopyrightProtected: true

## General comment
This dataset changes the names of the (internally used) electricity product of waste incineration and connects it with the external grid and the respective average energy markets (grid electricity).

## Time period
The Annual Production volume is valid for the year 2012.

## Reference product
- electricity, for reuse in municipal waste incineration only: 1 kWh; name E_el_prod_MSWI; source Doka G. 2013; By-product classification allocatable product; CPC 17100: Electrical energy; lognormal variance with pedigree 0.002, pedigree (1,1,3,1,1)
  electricity produced in municipal waste incineration (internal)
  properties: carbon allocation 0 kg, carbon content 0, price 0 EUR2005

## Inputs from technosphere
- electricity, medium voltage: 0.10684, 0.00126105, 0.000317707, 0.00116564, 0.000362587, 0.00259266, 0.0131726, 0.000603349, 0.00132721, 0.00526452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 kWh (64 suppliers, which the file names only by identifier); sum of these 1 kWh; = E_el_prod_MSWI; source Doka G. 2013
  Net electricity from municipal waste incineration fed in to public power grid
  production volume
    Literature value/statistics. Net grid-connected electricity produced from treatment of waste in 2012. Taken from the IEA electricity information 2014, table 1.3. Includes electricity production from industrial waste and municipal waste.
    IEA. 2014. Electricity Information 2014. ISBN 978-92-64-21692-1. International Energy Agency (IEA), Paris Cedex (FR).
  properties: price 0.1 EUR2005

## Extrapolations
based on Swiss data

## Review by Carl Vadenbo 2015-05-29
The update of the whole electricity sector for the ecoinvent v3.2 database consist of hundreds of datasets. All these datasets have passed through a streamlined review processes where the underlying modelling of production volumes, technology shares and efficiencies was reviewed in detail prior to the datasets being submitted to the database.
