# treatment of waste paint, municipal incineration

Dataset: EcoSpold 2, unit process
Geography: Europe without Switzerland
Time period: 2006-01-01 to 2022-12-31
Technology level: current
Classification: ISIC rev.4 ecoinvent: 3821:Treatment and disposal of non-hazardous waste
Synonyms: municipal waste incineration; Siedlungsabfallverbrennung; Kehrichtverbrennung
Scenario: Business-as-Usual
System model: Substitution, consequential, long-term
Share of production covered: 1.8 %
Generated by: [System]
Database: ecoinvent
isCopyrightProtected: true

## General comment
This dataset represents the activity of waste disposal of waste paint in a municipal solid waste incinerator (MSWI) // Recommended use of this dataset: For disposal of small amounts of dried paint, which go to disposal as part of a larger, burnable item or in small quantities. Larger amounts of waste paint, unused paint or removed (stripped) paint are to be disposed in hazardous waste incinerator. // // Waste composition (wet, in ppm): upper heating value 10.86 MJ/kg; lower heating value 10.14 MJ/kg; H2O n.a.; O 290300; H 36288; C 651510; S n.a.; N n.a.; P n.a.; B n.a.; Cl 1600; Br n.a.; F n.a.; I n.a.; Ag n.a.; As 2.5; Ba n.a.; Cd 5.0622; Co 388.23; Cr 1040.7; Cu 59; Hg 0.6; Mn n.a.; Mo 38.619; Ni 15; Pb 15246; Sb n.a.; Se n.a.; Sn 256.78; V n.a.; Zn 3251.5; Be n.a.; Sc n.a.; Sr n.a.; Ti n.a.; Tl n.a.; W n.a.; Si n.a.; Fe n.a.; Ca n.a.; Al n.a.; K n.a.; Mg n.a.; Na n.a.; // Share of carbon in waste that is biogenic 0%. // Share of metals in waste not oxidised and bulk-recyclable (exclude very small or thin parts) Iron: 0%; Alu: 0%; Copper: 0%. // One kg of this waste produces 0.02213 kg of slag and 0.01612 kg of residues, which are landfilled. Additional solidification with 0.006447 kg of cement. // Net energy production: 1.02MJ/kg electric energy and 2.11MJ/kg thermal energy. // Recovery of metal scrap to recycling: 0g iron scrap, 0g aluminium scrap, 0g copper scrap.

## Included activities start
waste incineration from waste reception gate and delivery into waste bunker at incinerator plant site (without transports to the incinerator)

## Included activities end
Waste-specific short-term emissions to water from leachate. Long-term emissions from landfill to ground water.

## Technology
average Swiss MSWI plants in 2010 (grate incinerators) with electrostatic precipitator for fly ash (ESP), wet flue gas scrubber and 25% SNCR , 42.77% SCR-high dust , 32.68% SCR-low dust -DeNOx facilities and 0% without Denox (weighted according to mass of burnt waste, representing Swiss average). Efficiency of iron scrap separation from slag : 58%. Efficiency of non-ferrous scrap separation from slag : 31%. Gross electric efficiency technology mix 15.84% and Gross thermal efficiency technology mix 28.51%

## Time period
Waste composition as given in literature reference, theoretical data or other source. Transfer coefficients for modern MSWI.

## Reference product
- waste paint: -1 kg; name WP; By-product classification Waste; CPC 39: Wastes or scraps
  Main reference product of this activity (supply of disposal service).
  production volume 5.29858e8 kg
    Estimated value. Eu paint market is of 5.37E+09kg (EUROPEAN COMMISSION 2002)
    of which 55% is paint and 35% is emulsion paint (http://www.psgdover.com/en/mouvex-paint-coatings-market-overview/what-are-paint-a-coatings/defining-paintaccessed, accessed 20151009). 22% is considered hazardous waste and 78% non hazardous waste (http://archive.epa.gov/sectors/web/pdf/paint_quantity_report.pdf, accessed 20151009).
    In the EU (Eurostat municipal waste treatment), of hazardous waste 23% is sent to hazardous incineration. Of non hazardous waste 23% is sent to incineration. 37% is considered to be sent to landfilling and it is split between sanitary and inert landfill using the same shares assumed for the US (see relevant dataset: “23% is sent to inert material landfill (http://archive.epa.gov/sectors/web/pdf/paint_quantity_report.pdf, accessed 20151009). The rest (65%) is considered to go to sanitary landfill.”)
    EUROPEAN COMMISSION (2002) STUDY ON HAZARDOUS HOUSEHOLD WASTE (HHW) WITH A MAIN EMPHASIS ON HAZARDOUS HOUSEHOLD CHEMICALS (HHC). Retrieved from: <http://ec.europa.eu/environment/waste/studies/pdf/household_report.pdf>, accessed 11th July 2016
    Eurostat. Sustainable Development Indicator (SDI) on municipal waste
    Retrieved from: <http://ec.europa.eu/eurostat/web/waste/transboundary-waste-shipments/key-waste-streams/municipal-waste>, accessed 11th July 2016
  property heating value, net 19.7 MJ
    LHV is calculated based on the Carbon content of the product. More details can be found on the respective documentation.
  property price 0 EUR2005
    Waste products are assigned a price of zero as they are assumed to require further treatment.
  properties: carbon allocation 0.65 kg, carbon content 0.65, carbon content, fossil 0.65, carbon content, non-fossil 0, dry mass 1 kg, water content 0, water in wet mass 0 kg, wet mass 1 kg

## Inputs from technosphere
- ammonia, anhydrous, liquid: 0.00056443 kg; lognormal variance with pedigree 0.19046, pedigree (1,1,4,1,1)
  Input to DeNOx stage (100% NH3).
  properties: dry mass 1 kg, wet mass 1 kg
- cement, unspecified: 0.0064468 kg; lognormal variance with pedigree 0.12047, pedigree (1,1,4,1,1)
  Cement required for solidification of landfilled residual material.
  properties: dry mass 1 kg, wet mass 1 kg
- chemical, inorganic: 8.3539e-5 kg; lognormal variance with pedigree 0.23138, pedigree (1,1,4,1,1)
  Auxilliary inputs for the wastewater treatment stage of the incinerator plant. Proxy for Polyelectrolyte.
  properties: carbon content, fossil 0.003, dry mass 1 kg, wet mass 1 kg
- chemical, organic: 1.1264e-5 kg; lognormal variance with pedigree 1.4768, pedigree (1,1,4,1,1)
  Auxilliary inputs for the wastewater treatment stage of the incinerator plant. Proxy for (pure) Trisodium-trimercapto-s-triazine (CAS 17766-26-6), used as 15% diluted solution, aka TMT15.
  properties: carbon content, fossil 0.628, dry mass 1 kg, heating value, net 19.03 MJ, wet mass 1 kg
- chromium oxide, flakes: 7.217e-7 kg; lognormal variance with pedigree 0.56726, pedigree (1,1,4,1,1)
  Input to DeNOx stage.
  properties: dry mass 1 kg, wet mass 1 kg
- electricity, for reuse in municipal waste incineration only: -0.0149063, -0.0149063, -0.0149063, -0.0149063, -0.0149063, -0.0149063, -0.0149063, -0.0149063, -0.0149063, -0.0149063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 kWh (19 suppliers, which the file names only by identifier); sum of these -0.28322 kWh; lognormal variance with pedigree 0.094074, pedigree (1,1,1,1,1)
  Net electricity generated from this waste and used in internal MSWI plant energy redistribution.
  production volume
    calculated in proportion to reference product waste input to incinerator
  properties: exergy 3.6 MJ, price 0.1 EUR2005
  note on exergy: This exergy property is based on the exergy content of the product.
- heat, district or industrial, natural gas: 0.10555 MJ; lognormal variance with pedigree 0.19046, pedigree (1,1,4,1,1)
  Input to DeNOx stage, to heat up flue gas in low-dust SCR.
  properties: heating value, net 1 MJ
- heat, for reuse in municipal waste incineration only: -0.110905, -0.110905, -0.110905, -0.110905, -0.110905, -0.110905, -0.110905, -0.110905, -0.110905, -0.110905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 MJ (19 suppliers, which the file names only by identifier); sum of these -2.1072 MJ; lognormal variance with pedigree 0.025417, pedigree (1,1,1,1,1)
  (same comment as for electricity, for reuse in municipal waste incineration only)
  production volume
    calculated in proportion to reference product waste input to incinerator
  properties: exergy 0.1842 MJ, price 0.0106 EUR2005
- hydrochloric acid, without water, in 30% solution state: 2.1958e-5 kg; lognormal variance with pedigree 0.23138, pedigree (1,1,4,1,1)
  Auxilliary inputs for the wastewater treatment stage of the incinerator plant.
  properties: dry mass 1 kg, heating value, net 3.32 MJ, wet mass 1 kg
- iron (III) chloride, without water, in 40% solution state: 0.00036433 kg; lognormal variance with pedigree 0.22043, pedigree (1,1,4,1,1)
  Auxilliary inputs for the wastewater treatment stage of the incinerator plant.
  properties: dry mass 1 kg, wet mass 1 kg
- municipal waste incineration facility: 2.5e-10 unit
  Demands per kilogram waste.
- process-specific burdens, residual material landfill: 0.016117 kg; lognormal variance with pedigree 0.11139, pedigree (1,1,4,1,1)
  Mass-specific expenditures required for landfilling of incineration residues.;activityLink introduced to establish a direct link to the corresponding regional supply of this product
- process-specific burdens, slag landfill: 0.020826 kg; lognormal variance with pedigree 0.068151, pedigree (1,1,4,1,1)
  Mass-specific expenditures required for landfilling of bottom ash.;activityLink introduced to establish a direct link to the corresponding regional supply of this product
- quicklime, milled, packed: 0.00085124 kg; lognormal variance with pedigree 0.60506, pedigree (1,1,4,1,1)
  Auxilliary inputs for the flue gas treatment stage of the incinerator plant.
  properties: dry mass 0.99 kg, water content 0.010101, wet mass 1 kg
- residual material landfill: 3.3577e-11 unit; lognormal variance with pedigree 0.11139, pedigree (1,1,4,1,1)
  Landfill infrastructure required for landfilling of incineration residues.
- slag landfill: 3.7024e-11 unit; lognormal variance with pedigree 0.068151, pedigree (1,1,4,1,1)
  Landfill infrastructure required for landfilling of bottom ash.
- sodium hydroxide, without water, in 50% solution state: 0.00016271 kg; lognormal variance with pedigree 0.60506, pedigree (1,1,4,1,1)
  Auxilliary inputs for the flue gas treatment stage of the incinerator plant.
  properties: dry mass 1 kg, heating value, net 3.03 MJ, wet mass 1 kg
- titanium dioxide: 3.5363e-5 kg; lognormal variance with pedigree 0.56726, pedigree (1,1,4,1,1)
  Input to DeNOx stage (TiO2 catalyst carrier)
  properties: dry mass 1 kg, wet mass 1 kg
- transport, freight, lorry, unspecified: 0.0014777 metric ton*km; lognormal variance with pedigree 0.047771, pedigree (1,1,4,1,1)
  Transport services to transport incineration residues to landfills.
- waste cement, hydrated: -0.016117 kg; name BP_WS; lognormal variance with pedigree 0.11247, pedigree (1,1,1,1,1)
  Hydrated cement output for solidification of landfilled residual material.
  production volume
    calculated in proportion to reference product waste input to incinerator
  properties: dry mass 1 kg, wet mass 1 kg
- water, decarbonised: 0.0102534, 0.185729, 0.280184, 0.0564837 kg (4 suppliers, which the file names only by identifier); sum of these 0.53265 kg; lognormal variance with pedigree 0.22043, pedigree (1,1,4,1,1)
  Incinerator process water used in flue gas scrubber stage.
  properties: wet mass 1 kg

## Inputs from nature
- Oxygen [natural resource, in air]: 2.0273 kg; lognormal variance with pedigree 0.0179652, pedigree (1,1,4,1,1)
  Oxygen from ambient air needed to combust and oxidise this waste. Net demand, i.e. without O2 leaving the plant in flue gas uncombusted.

## Emissions to nature
- Ammonia [air, urban air close to ground]: 6.6363e-7 kg; lognormal variance with pedigree 0.24168, pedigree (1,1,4,1,1)
  Nitrogen species emitted to air after DeNOx stage.
- Arsenic ion [air, urban air close to ground]: 1.9583e-8 kg; lognormal variance with pedigree 1.4696, pedigree (1,1,4,1,1)
  Emission to air from waste composition and transfer coefficients.
- Benzene [air, urban air close to ground]: 2.5855e-8 kg; lognormal variance with pedigree 0.087967, pedigree (1,1,4,1,1)
  Incomplete combustion product emitted to air.
- Benzene, hexachloro- [air, urban air close to ground]: 5.4062e-11 kg; lognormal variance with pedigree 0.087967, pedigree (1,1,4,1,1)
  Incomplete combustion product emitted to air.
- Benzene, pentachloro- [air, urban air close to ground]: 1.366e-10 kg; lognormal variance with pedigree 0.087967, pedigree (1,1,4,1,1)
  Incomplete combustion product emitted to air.
- Benzo(a)pyrene [air, urban air close to ground]: 5.7536e-13 kg; lognormal variance with pedigree 0.40409, pedigree (1,1,4,1,1)
  Incomplete combustion product emitted to air.
- Cadmium II [air, urban air close to ground]: 2.5802e-9 kg; lognormal variance with pedigree 1.39, pedigree (1,1,4,1,1)
  Emission to air from waste composition and transfer coefficients.
- Carbon dioxide, fossil [air, urban air close to ground]: 2.3744 kg; lognormal variance with pedigree 0.0135762, pedigree (1,1,4,1,1)
  Emission to air from waste composition and transfer coefficients.
- Carbon monoxide, fossil [air, urban air close to ground]: 4.3951e-5 kg; lognormal variance with pedigree 0.79082, pedigree (1,1,4,1,1)
  Incomplete combustion product emitted to air.
- Chromium III [air, urban air close to ground]: 9.0878e-7 kg; lognormal variance with pedigree 0.68004, pedigree (1,1,4,1,1)
  Emission to air from waste composition and transfer coefficients.
- Cobalt II [air, urban air close to ground]: 7.0607e-7 kg; lognormal variance with pedigree 0.80366, pedigree (1,1,4,1,1)
  Emission to air from waste composition and transfer coefficients.
- Copper ion [air, urban air close to ground]: 5.4038e-9 kg; lognormal variance with pedigree 1.0755, pedigree (1,1,4,1,1)
  Emission to air from waste composition and transfer coefficients.
- Dioxins, measured as 2,3,7,8-tetrachlorodibenzo-p-dioxin [air, urban air close to ground]: 5.1707e-14 kg; lognormal variance with pedigree 0.40409, pedigree (1,1,4,1,1)
  Incomplete combustion product emitted to air.
- Heat, waste [air, urban air close to ground]: 8.4854 MJ; lognormal variance with pedigree 0.024101, pedigree (1,1,4,1,1)
  Waste heat generated from heating value of this waste plus any electricity required to process it.
- Hydrochloric acid [air, urban air close to ground]: 9.1305e-7 kg; lognormal variance with pedigree 0.6279, pedigree (1,1,4,1,1)
  Emission to air from waste composition and transfer coefficients.
- Lead II [air, urban air close to ground]: 1.2561e-6 kg; lognormal variance with pedigree 0.36004, pedigree (1,1,4,1,1)
  Emission to air from waste composition and transfer coefficients.
- Mercury II [air, urban air close to ground]: 1.7012e-8 kg; lognormal variance with pedigree 1.6488, pedigree (1,1,4,1,1)
  Emission to air from waste composition and transfer coefficients.
- Methane, fossil [air, urban air close to ground]: 3.8783e-7 kg; lognormal variance with pedigree 0.087967, pedigree (1,1,4,1,1)
  Incomplete combustion product emitted to air.
- Molybdenum VI [air, urban air close to ground]: 5.0815e-8 kg; lognormal variance with pedigree 1.1122, pedigree (1,1,4,1,1)
  Emission to air from waste composition and transfer coefficients.
- NMVOC, non-methane volatile organic compounds [air, urban air close to ground]: 1.1767e-6 kg; lognormal variance with pedigree 0.087967, pedigree (1,1,4,1,1)
  Incomplete combustion product emitted to air.
- Nickel II [air, urban air close to ground]: 1.8843e-8 kg; lognormal variance with pedigree 1.2442, pedigree (1,1,4,1,1)
  Emission to air from waste composition and transfer coefficients.
- Nitrogen oxides [air, urban air close to ground]: 0.00021015 kg; lognormal variance with pedigree 0.24168, pedigree (1,1,4,1,1)
  Sum of fuel-Nox and thermal-NOx emitted to air after DeNOx stage.
- Particulate Matter, < 2.5 um [air, urban air close to ground]: 3.0869e-6 kg; lognormal variance with pedigree 0.40409, pedigree (1,1,4,1,1)
  Incomplete combustion product emitted to air.
- Particulate Matter, > 2.5 um and < 10um [air, urban air close to ground]: 1.5512e-8 kg; lognormal variance with pedigree 0.19001, pedigree (1,1,4,1,1)
  Incomplete combustion product emitted to air.
- Phenol, pentachloro- [air, urban air close to ground]: 1.126e-11 kg; lognormal variance with pedigree 0.087967, pedigree (1,1,4,1,1)
  Incomplete combustion product emitted to air.
- Tin ion [air, urban air close to ground]: 1.6773e-10 kg; lognormal variance with pedigree 0.921, pedigree (1,1,4,1,1)
  Emission to air from waste composition and transfer coefficients.
- Toluene [air, urban air close to ground]: 5.171e-8 kg; lognormal variance with pedigree 0.087967, pedigree (1,1,4,1,1)
  Incomplete combustion product emitted to air.
- Water [air, urban air close to ground]: 0.0012013 m3; lognormal variance with pedigree 0.74382, pedigree (1,1,4,1,1)
  Water vapour from waste humidity, hydrogen oxidation and part of the process water.
- Zinc II [air, urban air close to ground]: 2.1794e-6 kg; lognormal variance with pedigree 0.53733, pedigree (1,1,4,1,1)
  Emission to air from waste composition and transfer coefficients.
- Arsenic ion [water, ground-, long-term]: 7.4864e-7 kg; lognormal variance with pedigree 1.4589, pedigree (1,1,4,1,1)
  Long-term emissions from landfilling of incineration residues.
- Arsenic ion [water, surface water]: 1.7318e-6 kg; lognormal variance with pedigree 1.3458, pedigree (1,1,4,1,1)
  Emissions to water from waste composition and transfer coefficients in incinerator and landfills.
- BOD5, Biological Oxygen Demand [water, ground-, long-term]: 0.0016004 kg; lognormal variance with pedigree 0.023401, pedigree (1,1,4,1,1)
  Long-term emissions from landfilling of incineration residues.
- BOD5, Biological Oxygen Demand [water, surface water]: 0.00075234 kg; lognormal variance with pedigree 0.037021, pedigree (1,1,4,1,1)
  (same comment as for Arsenic ion)
- COD, Chemical Oxygen Demand [water, ground-, long-term]: 0.0048926 kg; lognormal variance with pedigree 0.023401, pedigree (1,1,4,1,1)
  Long-term emissions from landfilling of incineration residues.
- COD, Chemical Oxygen Demand [water, surface water]: 0.00076213 kg; lognormal variance with pedigree 0.036328, pedigree (1,1,4,1,1)
  (same comment as for Arsenic ion)
- Cadmium II [water, ground-, long-term]: 3.6939e-7 kg; lognormal variance with pedigree 6.8199, pedigree (1,1,4,1,1)
  Long-term emissions from landfilling of incineration residues.
- Cadmium II [water, surface water]: 4.8518e-10 kg; lognormal variance with pedigree 1.135, pedigree (1,1,4,1,1)
  (same comment as for Arsenic ion)
- Chloride [water, ground-, long-term]: 0.00037076 kg; lognormal variance with pedigree 0.6017, pedigree (1,1,4,1,1)
  Long-term emissions from landfilling of incineration residues.
- Chloride [water, surface water]: 0.0012283 kg; lognormal variance with pedigree 0.49322, pedigree (1,1,4,1,1)
  (same comment as for Arsenic ion)
- Chromium III [water, surface water]: 8.081e-8 kg; lognormal variance with pedigree 0.69617, pedigree (1,1,4,1,1)
  (same comment as for Arsenic ion)
- Chromium VI [water, ground-, long-term]: 9.547e-5 kg; lognormal variance with pedigree 1.162, pedigree (1,1,4,1,1)
  Long-term emissions from landfilling of incineration residues.
- Chromium VI [water, surface water]: 2.9087e-5 kg; lognormal variance with pedigree 0.76479, pedigree (1,1,4,1,1)
  (same comment as for Arsenic ion)
- Cobalt II [water, ground-, long-term]: 0.00031626 kg; lognormal variance with pedigree 0.72944, pedigree (1,1,4,1,1)
  Long-term emissions from landfilling of incineration residues.
- Cobalt II [water, surface water]: 7.0339e-8 kg; lognormal variance with pedigree 1.15, pedigree (1,1,4,1,1)
  (same comment as for Arsenic ion)
- Copper ion [water, ground-, long-term]: 5.27e-5 kg; lognormal variance with pedigree 1.0218, pedigree (1,1,4,1,1)
  Long-term emissions from landfilling of incineration residues.
- Copper ion [water, surface water]: 7.6451e-9 kg; lognormal variance with pedigree 0.93931, pedigree (1,1,4,1,1)
  (same comment as for Arsenic ion)
- DOC, Dissolved Organic Carbon [water, ground-, long-term]: 0.001936 kg; lognormal variance with pedigree 0.023401, pedigree (1,1,4,1,1)
  Long-term emissions from landfilling of incineration residues.
- DOC, Dissolved Organic Carbon [water, surface water]: 0.00033282 kg; lognormal variance with pedigree 0.036409, pedigree (1,1,4,1,1)
  (same comment as for Arsenic ion)
- Heat, waste [water, surface water]: 1.9401 MJ; lognormal variance with pedigree 0.024101, pedigree (1,1,4,1,1)
  (same comment as for Heat, waste)
- Lead II [water, ground-, long-term]: 0.0073715 kg; lognormal variance with pedigree 3.4928, pedigree (1,1,4,1,1)
  Long-term emissions from landfilling of incineration residues.
- Lead II [water, surface water]: 1.4584e-6 kg; lognormal variance with pedigree 0.3102, pedigree (1,1,4,1,1)
  (same comment as for Arsenic ion)
- Mercury II [water, ground-, long-term]: 3.8214e-8 kg; lognormal variance with pedigree 3.1931, pedigree (1,1,4,1,1)
  Long-term emissions from landfilling of incineration residues.
- Mercury II [water, surface water]: 6.5162e-10 kg; lognormal variance with pedigree 1.1658, pedigree (1,1,4,1,1)
  (same comment as for Arsenic ion)
- Molybdenum VI [water, ground-, long-term]: 2.802e-5 kg; lognormal variance with pedigree 1.0951, pedigree (1,1,4,1,1)
  Long-term emissions from landfilling of incineration residues.
- Molybdenum VI [water, surface water]: 1.0548e-5 kg; lognormal variance with pedigree 0.73165, pedigree (1,1,4,1,1)
  (same comment as for Arsenic ion)
- Nickel II [water, ground-, long-term]: 1.4398e-5 kg; lognormal variance with pedigree 1.1926, pedigree (1,1,4,1,1)
  Long-term emissions from landfilling of incineration residues.
- Nickel II [water, surface water]: 1.0078e-8 kg; lognormal variance with pedigree 1.7706, pedigree (1,1,4,1,1)
  (same comment as for Arsenic ion)
- TOC, Total Organic Carbon [water, ground-, long-term]: 0.001936 kg; lognormal variance with pedigree 0.023401, pedigree (1,1,4,1,1)
  Long-term emissions from landfilling of incineration residues.
- TOC, Total Organic Carbon [water, surface water]: 0.00033282 kg; lognormal variance with pedigree 0.036409, pedigree (1,1,4,1,1)
  (same comment as for Arsenic ion)
- Tin ion [water, ground-, long-term]: 9.8276e-5 kg; lognormal variance with pedigree 1.7294, pedigree (1,1,4,1,1)
  Long-term emissions from landfilling of incineration residues.
- Tin ion [water, surface water]: 6.7933e-9 kg; lognormal variance with pedigree 1.5189, pedigree (1,1,4,1,1)
  (same comment as for Arsenic ion)
- Water [water, surface water]: 0.00047529 m3; lognormal variance with pedigree 0.95513, pedigree (1,1,4,1,1)
  Process water released to surface water.
- Zinc II [water, ground-, long-term]: 0.00098878 kg; lognormal variance with pedigree 2.6497, pedigree (1,1,4,1,1)
  Long-term emissions from landfilling of incineration residues.
- Zinc II [water, surface water]: 2.9336e-7 kg; lognormal variance with pedigree 0.47658, pedigree (1,1,4,1,1)
  (same comment as for Arsenic ion)
