# cottonseed to generic market for energy feed

Dataset: EcoSpold 2, unit process
Geography: RoW
Time period: 2016-01-01 to 2022-12-31
Technology level: current
Classification: ISIC rev.4 ecoinvent: 1080:Manufacture of prepared animal feeds
Scenario: Business-as-Usual
System model: Substitution, consequential, long-term
Generated by: Avraam Symeonidis
Database: ecoinvent
isCopyrightProtected: true

## General comment
This is a linking (transfering) activity which links cottonseed, to the generic market for energy feed. Cottonseeds are a by-product of the cotton ginning process which produces cotton fibres.

## Included activities start
The activity starts with the reception of cottonseeds.

## Included activities end
The activity models the part of cottonseeds that contribute to the generic market for energy feed, resulting in energy and protein outputs.

## Reference product
- cottonseed: 1 kg; name cottonseed_input; By-product classification allocatable product; CPC 0143: Cottonseed
  property carbon content, non-fossil 0.475
    Biogenic carbon content of vegetation on a dry mass basis (47.5% DM) derived from FAOSTAT.
    Reference: http://www.fao.org/forestry/17111/en
  property dry mass 0.923 kg; name cottonseed_input_DM
  property energy content 23.8 MJ; name cottonseed_input_gross_E_feed_per_kg_DM
    Gross energy content (23.8 MJ/kg DM) for cottonseed. Reference: Feedipedia - Animal Feed Resources Information System. Accessed online at: https://www.feedipedia.org/node/742 on 05/06/2019.
  property protein content 0.218; name cottonseed_input_protein_feed_per_kg_DM
    Crude protein content (21.8 % DM) for cottonseeds. Reference: Feedipedia - Animal Feed Resources Information System. Accessed online at: https://www.feedipedia.org/node/742 on 05/06/2019.
  properties: carbon allocation 0.438425 kg, carbon content 0.475, carbon content, fossil 0, price 0 EUR2005, water content 0.0834236, water in wet mass 0.077 kg, wet mass 1 kg

## Inputs from technosphere
- energy feed, gross: 1.00758, 20.9598 MJ (2 suppliers, which the file names only by identifier); sum of these 21.9674 MJ; = cottonseed_input_gross_E_feed_per_kg_DM* cottonseed_input*cottonseed_input_DM
  Calculated based on literature value for "cottonseed" (Feedipedia, 2019), which reports a crude protein content of 21.3% of dry matter; while gross energy content equates to 23.8 MJ/kg dry matter of feed. Dry matter content equates 92.3% of wet mass of feed. Reference(s): Feedipedia (2019) Hominy Feed, Animal Feed Resources Information System, Accessed online at: https://www.feedipedia.org/node/742 on 05/06/2019.
  production volume
    Calculated based on the production volume of cottonseed. Given the global production volume of cottonseed (39706800000 kg), the production volume of energy feed driven to the generic market for energy feed is calculated to be 174451031664 MJ. It is assumed that 20% of the cottonseed produced is further used as animal feed.
  properties: dry mass 1 kg, price 0.0108 EUR2005, wet mass 1 kg
- protein feed, 100% crude: 0.201214 kg; name BP; = cottonseed_input_protein_feed_per_kg_DM* cottonseed_input*cottonseed_input_DM; lognormal variance with pedigree 0.0093, pedigree (4,3,1,3,1)
  (same comment as for energy feed, gross)
  production volume
    Calculated based on the production volume of cottonseed. Given the global production volume of cottonseed (39706800000 kg), the production volume of energy feed driven to the generic market for energy feed is calculated to be 7989564055.2 kg.
  properties: carbon content, non-fossil 0.53, dry mass 1 kg, price 0.424 EUR2005, wet mass 1 kg
