# heat production, wood chips from post-consumer wood, at furnace 300kW

Dataset: EcoSpold 2, unit process
Geography: RoW
Time period: 2000-01-01 to 2022-12-31
Technology level: current
Classification: ISIC rev.4 ecoinvent: 3530:Steam and air conditioning supply
Classification: EcoSpold01Categories: wood energy/heating systems
Scenario: Business-as-Usual
System model: Substitution, consequential, long-term
Share of production covered: 0.1 %
Generated by: Emilia Moreno Ruiz
Published in: Bauer, C. 2007
Database: ecoinvent
isCopyrightProtected: true

## General comment
This inventory is based on a proxy due to lack of specific process data. This proxy is obtained from the dataset "heat production, wood chips from industry, at furnace 300kW". The heat of combustion of chips from post-consumer wood is based on the low heating value of mixed wood chips and furnace efficiency. The density is 188.6 kg dry mass/m3.
In reality this type of wood will produce additional emissions as opposed to natural wood, due to substances applied to wood during its lifetime. Therefore, the present inventory shall be considered as a rough estimation and should be revised when more reliable data is available. The uncertainty has been adjusted accordingly.
Air emission factors as well as the boiler efficiency represent average annual operation including start and stop (warm-up and shut-down). Therefore, emission data will be higher and efficiency will be lower than rated values provided by manufacturers. The inventory shall be considered as being representative also for boilers with nominal capacities in the approximate range of 70 kW to 500 kW.

## Included activities start
The activity starts with the arrival of wood chips from post-consumer wood in the furnace

## Included activities end
Included are the infrastructure, the wood requirements (wood chips, from post-consumer wood), the emissions to air, the electricity needed for operation, and the disposal of the ashes.

## Geography
LCI data for Switzerland were used for the GLO activityy as first approximation with uncertainty factors adjusted accordingly.

## Technology
Boiler of average technology available on the Swiss market.

## Time period
Key emission factors PM, CO, NMVOC, CH4, NOx as well as the average annual efficiency have been updated using the latest available information. Other emission data are from the second half of the 1990´s.

## Parameters
- scaling factor: 1.33333 dimensionless; name scaling_factor; = 1/0.75; lognormal variance with pedigree 0.0122, pedigree (2,3,1,5,3)
  The scaling factor corresponds to the inverse of the average annual efficiency of the heating system, including start/stop (warm up and cool down). Therefore, this efficiency will be lower than figures provided by manufacturers. The estimated value was provided by T.Nussbaumer, Verenum, and represents the average installed boiler in this size category in Switzerland. Uncertainty factors for the GLO activity have been increased accordingly.

## Reference product
- wood chips, from post-consumer wood, measured as dry mass: 1 kg; = 1/18.9 * scaling_factor; By-product classification allocatable product; CPC 3928: Sawdust and wood waste and scrap; lognormal variance with pedigree 0.008, pedigree (1,1,4,1,1)
  uncertainty on energy and water content, and bulk density
  Amount was scaled to the amount of reference product.
  property heating value, net 9.99 MJ
    LHV is calculated based on the Carbon content of the product. More details can be found on the respective documentation.
  properties: carbon allocation 0.494 kg, carbon content 0.494, carbon content, fossil 0, carbon content, non-fossil 0.494, dry mass 1 kg, price 0 EUR2005, water content 0.4, water in wet mass 0.4 kg, wet mass 1.4 kg

## Inputs from technosphere
- electricity, low voltage: -0.00100097, -0.0602413, -0.00671842, -0.00721644, -0.000251622, -0.00338431 kWh (6 suppliers, which the file names only by identifier); sum of these -0.078813 kWh; = 0.00417 * scaling_factor; source Bauer, C. 2007; lognormal variance with pedigree 0.4733, pedigree (2,2,5,5,2)
  literature. Original value [per MJ fuel input] was scaled to 1 MJ reference product output
  EcoSpold01Location=CH
- furnace, wood chips, with silo, 300kW: -3.28125e-7 unit; = 1/(300*20*2000*3.6)
  estimation based on 20a lifetime, 2000h/a, 300kW capacity
- heat, district or industrial, other than natural gas: 14.1503, 0.0247089 MJ (2 suppliers, which the file names only by identifier); sum of these 14.175 MJ; = 0.75 * scaling_factor; source Thomas Nussbaumer 2014
  The numbers used in the mathematical relation refer to the input of one MJ of fuel with the heat output depending on the efficiency of the furnace. Using the "scling factor" (inverse of the efficiency) allows for scaling of the amount of the reference product to 1.
  EcoSpold01Location=CH
  production volume
    Assumption.This value does not represent reality but has been chosen in order to model the correct shares of district/industrial heat producing datasets on the market for heat, district or industrial, other than natural gas according to http://www.iea.org/statistics/statisticssearch/report/?country=WORLD&product=electricityandheat&year=2012
  properties: Corresponding fuel use 1.22 MJ, heating value, net 1 MJ, price 0.0106 EUR2005
- wood ash mixture, pure: 0.00945 kg; name wood_ash; = 0.0005 * scaling_factor; source Bauer, C. 2007; lognormal variance with pedigree 0.002, pedigree (1,1,1,5,1)
  (same comment as for electricity, low voltage)
  production volume
    Calculated from the production volume of reference product in proportion to the respective output amounts.
  properties: carbon content, non-fossil 0.012, dry mass 1 kg, wet mass 1 kg

## Emissions to nature
- Acetaldehyde [air, urban air close to ground]: -1.1529e-6 kg; = 6.1E-08 * scaling_factor; source Bauer, C. 2007; lognormal variance with pedigree 0.44, pedigree (1,1,4,5,1)
  literature. Original value [per MJ fuel input] was scaled to 1 MJ reference product output
- Ammonia [air, urban air close to ground]: -3.2697e-5 kg; = 1.73E-06 * scaling_factor; source Bauer, C. 2007; lognormal variance with pedigree 0.44, pedigree (1,1,4,5,1)
  literature. Original value [per MJ fuel input] was scaled to 1 MJ reference product output
- Arsenic ion [air, urban air close to ground]: -1.89e-8 kg; = 1E-09 * scaling_factor; source Bauer, C. 2007; lognormal variance with pedigree 0.44, pedigree (1,1,4,5,1)
  literature. Original value [per MJ fuel input] was scaled to 1 MJ reference product output
- Benzene [air, urban air close to ground]: -1.7199e-5 kg; = 9.1E-07 * scaling_factor; source Bauer, C. 2007; lognormal variance with pedigree 0.44, pedigree (1,1,4,5,1)
  literature. Original value [per MJ fuel input] was scaled to 1 MJ reference product output
- Benzene, ethyl- [air, urban air close to ground]: -5.67e-7 kg; = 3E-08 * scaling_factor; source Bauer, C. 2007; lognormal variance with pedigree 0.44, pedigree (1,1,4,5,1)
  literature. Original value [per MJ fuel input] was scaled to 1 MJ reference product output
- Benzene, hexachloro- [air, urban air close to ground]: -1.3608e-13 kg; = 7.2E-15 * scaling_factor; source Bauer, C. 2007; lognormal variance with pedigree 0.44, pedigree (1,1,4,5,1)
  literature. Original value [per MJ fuel input] was scaled to 1 MJ reference product output
- Benzo(a)pyrene [air, urban air close to ground]: -9.45e-9 kg; = 5E-10 * scaling_factor; source Bauer, C. 2007; lognormal variance with pedigree 0.44, pedigree (1,1,4,5,1)
  literature. Original value [per MJ fuel input] was scaled to 1 MJ reference product output
- Bromine [air, urban air close to ground]: -1.134e-6 kg; = 6E-08 * scaling_factor; source Bauer, C. 2007; lognormal variance with pedigree 0.44, pedigree (1,1,4,5,1)
  literature. Original value [per MJ fuel input] was scaled to 1 MJ reference product output
- Cadmium II [air, urban air close to ground]: -1.323e-8 kg; = 7E-10 * scaling_factor; source Bauer, C. 2007; lognormal variance with pedigree 0.44, pedigree (1,1,4,5,1)
  literature. Original value [per MJ fuel input] was scaled to 1 MJ reference product output
- Calcium [air, urban air close to ground]: -0.000110565 kg; = 5.85E-06 * scaling_factor; source Bauer, C. 2007; lognormal variance with pedigree 0.44, pedigree (1,1,4,5,1)
  literature. Original value [per MJ fuel input] was scaled to 1 MJ reference product output
- Carbon dioxide, non-fossil [air, urban air close to ground]: -2.0223 kg; = 0.107 * scaling_factor; source Bauer, C. 2007; lognormal variance with pedigree 0.01, pedigree (1,1,4,5,1)
  literature. Original value [per MJ fuel input] was scaled to 1 MJ reference product output
- Carbon monoxide, non-fossil [air, urban air close to ground]: -0.00945 kg; = 5E-04 * scaling_factor; source Thomas Nussbaumer 2014; lognormal variance with pedigree 0.35, pedigree (1,1,4,5,1)
  expert estimation (see source)
- Chlorine [air, urban air close to ground]: -3.402e-6 kg; = 1.8E-07 * scaling_factor; source Bauer, C. 2007; lognormal variance with pedigree 0.44, pedigree (1,1,4,5,1)
  literature. Original value [per MJ fuel input] was scaled to 1 MJ reference product output
- Chromium III [air, urban air close to ground]: -7.4844e-8 kg; = 3.96E-09 * scaling_factor; source Bauer, C. 2007; lognormal variance with pedigree 0.44, pedigree (1,1,4,5,1)
  literature. Original value [per MJ fuel input] was scaled to 1 MJ reference product output
- Chromium VI [air, urban air close to ground]: -7.56e-10 kg; = 4E-11 * scaling_factor; source Bauer, C. 2007; lognormal variance with pedigree 0.49, pedigree (1,1,4,5,1)
  literature. Original value [per MJ fuel input] was scaled to 1 MJ reference product output
- Copper ion [air, urban air close to ground]: -4.158e-7 kg; = 2.2E-08 * scaling_factor; source Bauer, C. 2007; lognormal variance with pedigree 0.44, pedigree (1,1,4,5,1)
  literature. Original value [per MJ fuel input] was scaled to 1 MJ reference product output
- Dinitrogen monoxide [air, urban air close to ground]: -4.725e-5 kg; = 2.5E-06 * scaling_factor; source Bauer, C. 2007; lognormal variance with pedigree 0.44, pedigree (1,1,4,5,1)
  literature. Original value [per MJ fuel input] was scaled to 1 MJ reference product output
- Dioxins, measured as 2,3,7,8-tetrachlorodibenzo-p-dioxin [air, urban air close to ground]: -5.859e-13 kg; = 3.1E-14 * scaling_factor; source Bauer, C. 2007; lognormal variance with pedigree 0.44, pedigree (1,1,4,5,1)
  literature. Original value [per MJ fuel input] was scaled to 1 MJ reference product output
- Fluorine [air, urban air close to ground]: -9.45e-7 kg; = 5E-08 * scaling_factor; source Bauer, C. 2007; lognormal variance with pedigree 0.44, pedigree (1,1,4,5,1)
  literature. Original value [per MJ fuel input] was scaled to 1 MJ reference product output
- Formaldehyde [air, urban air close to ground]: -2.457e-6 kg; = 1.3E-07 * scaling_factor; source Bauer, C. 2007; lognormal variance with pedigree 0.44, pedigree (1,1,4,5,1)
  literature. Original value [per MJ fuel input] was scaled to 1 MJ reference product output
- Hydrocarbons, aliphatic, alkanes, unspecified [air, urban air close to ground]: -1.7199e-5 kg; = 9.1E-07 * scaling_factor; source Bauer, C. 2007; lognormal variance with pedigree 0.44, pedigree (1,1,4,5,1)
  literature. Original value [per MJ fuel input] was scaled to 1 MJ reference product output
- Hydrocarbons, aliphatic, unsaturated [air, urban air close to ground]: -5.859e-5 kg; = 3.1E-06 * scaling_factor; source Bauer, C. 2007; lognormal variance with pedigree 0.44, pedigree (1,1,4,5,1)
  literature. Original value [per MJ fuel input] was scaled to 1 MJ reference product output
- Lead II [air, urban air close to ground]: -4.725e-7 kg; = 2.5E-08 * scaling_factor; source Bauer, C. 2007; lognormal variance with pedigree 0.44, pedigree (1,1,4,5,1)
  literature. Original value [per MJ fuel input] was scaled to 1 MJ reference product output
- Magnesium [air, urban air close to ground]: -6.804e-6 kg; = 3.6E-07 * scaling_factor; source Bauer, C. 2007; lognormal variance with pedigree 0.44, pedigree (1,1,4,5,1)
  literature. Original value [per MJ fuel input] was scaled to 1 MJ reference product output
- Manganese II [air, urban air close to ground]: -3.213e-6 kg; = 1.7E-07 * scaling_factor; source Bauer, C. 2007; lognormal variance with pedigree 0.44, pedigree (1,1,4,5,1)
  literature. Original value [per MJ fuel input] was scaled to 1 MJ reference product output
- Mercury II [air, urban air close to ground]: -5.67e-9 kg; = 3E-10 * scaling_factor; source Bauer, C. 2007; lognormal variance with pedigree 0.44, pedigree (1,1,4,5,1)
  literature. Original value [per MJ fuel input] was scaled to 1 MJ reference product output
- Methane, non-fossil [air, urban air close to ground]: -8.505e-5 kg; = 4.5E-06 * scaling_factor; source Bauer, C. 2007; lognormal variance with pedigree 0.44, pedigree (1,1,4,5,1)
  literature. Original value [per MJ fuel input] was scaled to 1 MJ reference product output
- NMVOC, non-methane volatile organic compounds [air, urban air close to ground]: -0.00019845 kg; = 10.5E-06 * scaling_factor; source Thomas Nussbaumer 2014; lognormal variance with pedigree 0.17, pedigree (1,1,4,5,1)
  expert estimation (see source)
- Nickel II [air, urban air close to ground]: -1.134e-7 kg; = 6E-09 * scaling_factor; source Bauer, C. 2007; lognormal variance with pedigree 0.44, pedigree (1,1,4,5,1)
  literature. Original value [per MJ fuel input] was scaled to 1 MJ reference product output
- Nitrogen oxides [air, urban air close to ground]: -0.003402 kg; = 1.8e-4 * scaling_factor; source Thomas Nussbaumer 2014; lognormal variance with pedigree 0.04, pedigree (1,1,4,5,1)
  expert estimation (see source)
- PAH, polycyclic aromatic hydrocarbons [air, urban air close to ground]: -2.0979e-7 kg; = 1.11E-08 * scaling_factor; source Bauer, C. 2007; lognormal variance with pedigree 0.44, pedigree (1,1,4,5,1)
  literature. Original value [per MJ fuel input] was scaled to 1 MJ reference product output
- Particulate Matter, < 2.5 um [air, urban air close to ground]: -0.001701 kg; = 9E-05 * scaling_factor; source Thomas Nussbaumer 2014; lognormal variance with pedigree 0.13, pedigree (1,1,4,5,1)
  expert estimation (see source)
- Particulate Matter, > 2.5 um and < 10um [air, urban air close to ground]: -9.45e-5 kg; = 5E-06 * scaling_factor; source Thomas Nussbaumer 2014; lognormal variance with pedigree 0.4413, pedigree (2,2,4,5,2)
  expert estimation (see source)
- Phenol, pentachloro- [air, urban air close to ground]: -1.5309e-10 kg; = 8.1E-12 * scaling_factor; source Bauer, C. 2007; lognormal variance with pedigree 0.44, pedigree (1,1,4,5,1)
  literature. Original value [per MJ fuel input] was scaled to 1 MJ reference product output
- Phosphorus [air, urban air close to ground]: -5.67e-6 kg; = 3E-07 * scaling_factor; source Bauer, C. 2007; lognormal variance with pedigree 0.44, pedigree (1,1,4,5,1)
  literature. Original value [per MJ fuel input] was scaled to 1 MJ reference product output
- Potassium I [air, urban air close to ground]: -0.00044226 kg; = 2.34E-05 * scaling_factor; source Bauer, C. 2007; lognormal variance with pedigree 0.44, pedigree (1,1,4,5,1)
  literature. Original value [per MJ fuel input] was scaled to 1 MJ reference product output
- Sodium [air, urban air close to ground]: -2.457e-5 kg; = 1.3E-06 * scaling_factor; source Bauer, C. 2007; lognormal variance with pedigree 0.44, pedigree (1,1,4,5,1)
  literature. Original value [per MJ fuel input] was scaled to 1 MJ reference product output
- Sulfur dioxide [air, urban air close to ground]: -4.725e-5 kg; = 2.5E-06 * scaling_factor; source Bauer, C. 2007; lognormal variance with pedigree 0.44, pedigree (1,1,4,5,1)
  literature. Original value [per MJ fuel input] was scaled to 1 MJ reference product output
- Toluene [air, urban air close to ground]: -5.67e-6 kg; = 3E-07 * scaling_factor; source Bauer, C. 2007; lognormal variance with pedigree 0.44, pedigree (1,1,4,5,1)
  literature. Original value [per MJ fuel input] was scaled to 1 MJ reference product output
- Water [air, urban air close to ground]: -0.0008505 m3; lognormal variance with pedigree 0.0163, pedigree (2,2,4,5,2)
  water emissions to air introduced in order to guarantee a correct water balance; emissions represent direct emissions from combustion plus previous emissions during natural drying of stored wood chips
- Zinc II [air, urban air close to ground]: -5.67e-6 kg; = 3E-07 * scaling_factor; source Bauer, C. 2007; lognormal variance with pedigree 0.44, pedigree (1,1,4,5,1)
  literature. Original value [per MJ fuel input] was scaled to 1 MJ reference product output
- m-Xylene [air, urban air close to ground]: -2.268e-6 kg; = 1.2E-07 * scaling_factor; source Bauer, C. 2007; lognormal variance with pedigree 0.44, pedigree (1,1,4,5,1)
  literature. Original value [per MJ fuel input] was scaled to 1 MJ reference product output

## Extrapolations
This dataset has been copied from an original dataset covering the geography CH. The uncertainty has been adjusted accordingly.
