# chromium production

Dataset: EcoSpold 2, unit process
Geography: RoW
Time period: 1994-01-01 to 2022-12-31
Technology level: current
Classification: ISIC rev.4 ecoinvent: 2420:Manufacture of basic precious and other non-ferrous metals
Classification: EcoSpold01Categories: metals/extraction
Synonyms: chrome
Tags: ConvertedDataset
Scenario: Business-as-Usual
System model: Substitution, consequential, long-term
Share of production covered: 100 %
Generated by: [System]
Published in: Althaus H.-J. 2000
Database: ecoinvent
isCopyrightProtected: true

## General comment
The module describes the chromium metal consumed Europe in 1994. It is designed solely for the use of the metal as alloying element in super-alloys (Ni-Cr). Usually stainless steels are made from ferrochrome and not from chromium metal. Chromium is considered to be made by aluminothermic process (75%) and electrolysis (25%). This module does not consider secondary sources of chromium. The general date quality is not satisfying, due to a lack of information.
[This dataset was already contained in the ecoinvent database version 2. It was not individually updated during the transfer to ecoinvent version 3. Life Cycle Impact Assessment results may still have changed, as they are affected by changes in the supply chain, i.e. in other datasets. This dataset was generated following the ecoinvent quality guidelines for version 2. It may have been subject to central changes described in the ecoinvent version 3 change report (http://www.ecoinvent.org/database/ecoinvent-version-3/reports-of-changes/), and the results of the central updates were reviewed extensively. The changes added e.g. consistent water flows and other information throughout the database. The documentation of this dataset can be found in the ecoinvent reports of version 2, which are still available via the ecoinvent website. The change report linked above covers all central changes that were made during the conversion process.]

## Included activities end
Both aluminothermic production and electrolysis are aggregated in this module. It comprises the production of Cr2O3 as intermediary product, the aluminothermic process, the transport of the raw materials to Europe and the electrolysis. No emissions are taken into account. No secondary production considered, since secondary chromium is recycled to the foundries and has to be inventoried in the respective module, i. e. when casting the final rawmaterial in the stainless steel production.

## Geography
World-wide production mix is chosen as proxy for the consumption mix in Europe.

## Technology
Metallic chromium is produced by aluminothermic process (75%) and electroylsis of dissolved ferrochromium (25%)

## Reference product
- chromium: 1 kg; By-product classification allocatable product; CPC 41603: Bismuth, antimony, manganese, chromium and articles thereof; including waste and scrap of bismuth or manganese; CAS 7440-47-3
  EcoSpold01Location=RER
  production volume 2.67763 kg
    This is a placeholder value that does not reflect real-world production volumes. This dataset does not currently require a real-world production volume to work in the database framework, and no actual data were collected yet. This has no negative effect on the results of the ecoinvent database.
  property price 1.243 EUR2005
    Literature value (USGS, http://minerals.usgs.gov/minerals/pubs/commodity/chromium/myb1-2012-chrom.pdf, accessed 20160222).
  properties: carbon allocation 0 kg, carbon content 0, carbon content, fossil 0, carbon content, non-fossil 0, dry mass 1 kg, water content 0, water in wet mass 0 kg, wet mass 1 kg

## Inputs from technosphere
- aluminium, wrought alloy: 0.498 kg; lognormal variance with pedigree 0.1321, pedigree (5,2,5,5,1)
  Modelled, based on “ISIC 2420” - pdf-document on the dedicated talk page of ecoinvent (www.ecoinvent.org/documentation).
  See part Regarding “chromium production, RER 2003” dataset.
  Further references:
  Hall F. W. (1997) Nickel. In: Ullmann's encyclopedia of industrial chemistry (ed. Processes A.). 5th edition on CD-ROM Edition. Wiley & Sons, London.
  Adelhardt W. and Antrekowitsch H. (1998) Stoffmengenflüsse und Energiebedarf bei der Gewinnung ausgewählter mineralischer Rohstoffe; Teilstudie Chrom. In: Geologisches Jahrbuch, Vol. Sonderhefte SH 3. Bundesanstalt für Geowissenschaften und Rohstoffe, Hannover. ISBN 3-510-95831-4.
  EcoSpold01Location=RER
  Uncertainty: estimate based on assumptions
  properties: dry mass 1 kg, wet mass 1 kg
- chromite ore concentrate: 2.53 kg; lognormal variance with pedigree 0.1321, pedigree (5,2,5,5,1)
  EcoSpold01Location=GLO
  Modelled, based on “ISIC 2420” - pdf-document on the dedicated talk page of ecoinvent (www.ecoinvent.org/documentation).
  See part Regarding “chromium production, RER 2003” dataset.
  Further references:
  Hall F. W. (1997) Nickel. In: Ullmann's encyclopedia of industrial chemistry (ed. Processes A.). 5th edition on CD-ROM Edition. Wiley & Sons, London.
  Adelhardt W. and Antrekowitsch H. (1998) Stoffmengenflüsse und Energiebedarf bei der Gewinnung ausgewählter mineralischer Rohstoffe; Teilstudie Chrom. In: Geologisches Jahrbuch, Vol. Sonderhefte SH 3. Bundesanstalt für Geowissenschaften und Rohstoffe, Hannover. ISBN 3-510-95831-4.
  Uncertainty: estimate based on assumptions
  properties: dry mass 1 kg, wet mass 1 kg
- electricity, high voltage: 22.6 kWh; lognormal variance with pedigree 0.0541, pedigree (3,2,5,5,1)
  Modelled, based on “ISIC 2420” - pdf-document on the dedicated talk page of ecoinvent (www.ecoinvent.org/documentation).
  See part Regarding “chromium production, RER 2003” dataset.
- electricity, medium voltage: 1.9822, 1.37325, 0.0736052, 16.3545, 0.0741644, 0.942284 kWh (6 suppliers, which the file names only by identifier); sum of these 20.8 kWh; lognormal variance with pedigree 0.0541, pedigree (3,2,5,5,1)
  Calculated value: The total medium voltage electricity consumption equals the consumption of the aluminothermic and electrolytic steps. The individual consumption of each of these is Modelled, based on ISIC 2420” - pdf-document on the dedicated talk page of ecoinvent (www.ecoinvent.org/documentation). (See part Regarding “chromium production, RER 2003” dataset).
  Further references:
  Papp J. F. (1994) Chromium Life Cycle Study. IC-9411. U.S. Department of the Interior, U.S. Geological Survey, Online-Version under: http://pubs.usgs.gov/ usbmic/ic-9411/ic-9411.pdf <http://pubs.usgs.gov/usbmic/ic-9411/ic-9411.pdf>.
  EcoSpold01Location=UCTE
- ferrochromium, high-carbon, 68% Cr: 0.25 kg; lognormal variance with pedigree 0.0427, pedigree (2,2,5,5,1)
  Literature value.
  EcoSpold01Location=GLO
  properties: carbon content, fossil 0.07, dry mass 1 kg, heating value, net 2.12 MJ, wet mass 1 kg
  note on carbon content, fossil: Ferrochromium is a master alloy of iron and chromium, containing 45 – 95 % Cr and various amounts of iron, carbon, and other elements. High-carbon ferrochromium (HC ferrochromium) contains 4 – 10 % C (ecoinvent v2.2 report 20_part VI). An average content of 7% C was considered
- heat, district or industrial, natural gas: 12.8914, 84.9586 MJ (2 suppliers, which the file names only by identifier); sum of these 97.85 MJ; lognormal variance with pedigree 0.0427, pedigree (2,2,5,5,1)
  EcoSpold01Location=RER
  Modelled, based on “ISIC 2420” - pdf-document on the dedicated talk page of ecoinvent (www.ecoinvent.org/documentation).
  See part Regarding “chromium production, RER 2003” dataset.
- non-ferrous metal smelter: 1.08e-11 unit; lognormal variance with pedigree 0.43, pedigree (5,5,5,5,1)
  Proxy: "non-ferrous metal smelter" is used as a proxy for unspecified infrastructure for aluminothermy and electrolysis.
  Estimation from dataset author: All mas input (2.84 kg) is accounted for.
  EcoSpold01Location=GLO
  Uncertainty: rough estimate
- sodium dichromate: 0.366 kg; lognormal variance with pedigree 0.1321, pedigree (5,2,5,5,1)
  EcoSpold01Location=RER
  Modelled, based on “ISIC 2420” - pdf-document on the dedicated talk page of ecoinvent (www.ecoinvent.org/documentation).
  See part Regarding “chromium production, RER 2003” dataset.
  Further references:
  Hall F. W. (1997) Nickel. In: Ullmann's encyclopedia of industrial chemistry (ed. Processes A.). 5th edition on CD-ROM Edition. Wiley & Sons, London.
  Adelhardt W. and Antrekowitsch H. (1998) Stoffmengenflüsse und Energiebedarf bei der Gewinnung ausgewählter mineralischer Rohstoffe; Teilstudie Chrom. In: Geologisches Jahrbuch, Vol. Sonderhefte SH 3. Bundesanstalt für Geowissenschaften und Rohstoffe, Hannover. ISBN 3-510-95831-4.
  Uncertainty: estimate based on assumptions
  properties: dry mass 1 kg, wet mass 1 kg

## Sampling procedure
literature

## Extrapolations
see Geography and Technology This dataset has been copied from an original dataset covering the geography RER. The uncertainty has been adjusted accordingly.

## Review by Roland Hischier 2003-07-03
Passed.

## Review by Bo Weidema 2012-10-01
replaced input of "electricity, high voltage, hydro, run-of-river" with "electricity, high voltage" with a direct activity link to "electricity production, high voltage, hydro, run-of-river".
