# smelting of copper concentrate, sulfide ore

Dataset: EcoSpold 2, unit process
Geography: RoW
Time period: 1994-01-01 to 2022-12-31
Technology level: current
Classification: ISIC rev.4 ecoinvent: 2420:Manufacture of basic precious and other non-ferrous metals
Synonyms: copper smelting
Scenario: Business-as-Usual
System model: Substitution, consequential, long-term
Generated by: David Turner
Published in: Turner, D. A. 2020
Database: ecoinvent
isCopyrightProtected: true

## General comment
This dataset represents the smelting of copper concentrates to produce copper anodes at the global level.
Background: Copper is one of the world’s major mineral commodities and is mined from heterogeneous sulfide or oxide mineral deposits in countries worldwide. Copper sulfide deposits, such as those of the porphyry or massive sulphide type, contain numerous other valuable minerals, which are desirable to society. Copper is mined & beneficiated to produce a copper sulfide concentrate, as well as other by-product concentrates (e.g. molybdenite), which are sold to smelters. Copper sulfide concentrates are smelted to produce the intermediate product, copper anode. This is then sold to refineries, where it is electrorefined to produce copper cathode, which is sold to fabricators. The by-product of copper electrorefining is anode slime, which contains various important by-product metals (principally gold, silver, selenium & tellurium) and is sold to precious metal recovery plants for further processing to recover the valuable metals.
Modelling approach: The amounts are calculated as a weighted average of the amounts in the local datasets. The amounts of most exchanges are based on Classen et al. (2009). The amounts of by products from the process were calculated through a global material flow analysis of primary copper production. Electrical and thermal energy demand was based on the global smelter technology mix and estimated energy demand for each technology type (Turner & Hischier, 2020). Further information is provided in the sampling procedure, exchange comments and references.
References:
Classen M., Althaus H.-J., Blaser S., Tuchschmid M., Jungbluth N., Doka G., Faist Emmenegger M. and Scharnhorst W. (2009) Life Cycle Inventories of Metals. Final report ecoinvent data v2.1, No 10. EMPA Dübendorf, Swiss Centre for Life Cycle Inventories, Dübendorf, CH, Online-Version under: www.ecoinvent.ch.
Turner, D. A. & Hischier, R. (2020). Life cycle inventories of pyrometallurgical copper production and anode slime processing. Empa, St. Gallen, Switzerland.

## Included activities start
The activity starts with the delivery of copper concentrate, sulfide ore.

## Included activities end
Ends with the production of copper anode.

## Geography
The energy values are representative of the smelter technology mix used worldwide (Turner & Hischier, 2020). For the inputs from technosphere and emissions to environment, the values are based on those reported in Classen et al. (2009) for the GLO region.

## Technology
Based on the mix of smelter types in operation globally in 2002; assumed here to represent the current smelter technology mix: Reverberatory furnace, 12.4%; Isasmelt–Peirce–Smith furnace, 23.6%; Noranda–Teniente furnace, 52.6%; Mitsubishi process, 4.5%; and flash smelting, 6.7%.

## Time period
Production volumes are representative of the situation in 2015 but are considered valid until the end of 2019. Besides the values for electricity use, data sources for the inventory model have not been updated since v2.1 (see Classen et al. 2009).
Reference:
Classen, M., Althaus, H.-J., Blaser, S., Scharnhost, W., Tuchschmid, M., Jungbluth, N., & Emmenegger, M. F. (2009). Life cycle inventories of metals. Final report, ecoinvent data v2.1, No. 10. Dübendorf, Switzerland.

## Reference product
- copper, anode: 1 kg; name copper_anode_amount; By-product classification allocatable product; CPC 41412: Unrefined copper; copper anodes for electrolytic refining
  production volume 6.27532e9 kg
    According to USGS (2021), the global production of primary copper was 16'300'000 metric tons in 2018.
    References:
    USGS (2021). Copper Statistics and Information, Advance Data Release of the 2018 Annual Tables. https://prd-wret.s3.us-west-2.amazonaws.com/assets/palladium/production/atoms/files/myb1-2018-coppe-adv.xlsx
  property price 3.843 EUR2005
    Price calculated as:
    Price = (Cu content * Cu price) + (Au content * Au price) + (Ag content * Ag price) + (Te content * Te price) + (Se content * Se price) – Delivery costs – Penalties.
    Equation source: Devlin (2015)
    Price data were taken from USGS (2020) and represent 5-year market averages (2015-2019). Metal content values were taken from the literature (see Turner & Hischier 2019). Penalties and Delivery costs were assumed to be zero. Prices converted to EUR2005 (USD2019/EUR2005 exchange rate: 0.62; Official Data Foundation [2020] and Macrotrends [2020]).
    References:
    Devlin, D. (2015). Mineral product pricing study [Online]. Available from: https://www.imf.org/external/spanish/np/seminars/2015/andean/pdf/sesion5-devlin-en.pdf [Accessed 28/07/2020]
    Turner, D. & Hischier, R. (2019). Life cycle inventories of copper production (pyrometallurgy) and anode slime processing. Empa: St Gallen, Switzerland.
    Official Data Foundation (2020). Inflation Calculator [Online]. Available from: https://www.officialdata.org/us/inflation/2005?endYear=2019&amount=1 [Accessed 28/07/2020]
    USGS (2020). Mineral Commodity Summaries 2020 [Online]. Available from: https://pubs.usgs.gov/periodicals/mcs2020/mcs2020.pdf [Accessed 28/07/2020]
    Macrotrends (2020). Euro Dollar Exchange Rate (EUR USD) - Historical Chart [Online]. Available from: https://www.macrotrends.net/2548/euro-dollar-exchange-rate-historical-chart [Accessed 28/07/2020]
  properties: carbon allocation 0 kg, carbon content 0, carbon content, fossil 0, carbon content, non-fossil 0, copper content 0.997, dry mass 1 kg, gold content 7.47727e-6, selenium content 0.000192067, silver content 0.000269472, tellurium content 1.28895e-5, water content 0, water in wet mass 0 kg, wet mass 1 kg

## Inputs from technosphere
- anode, for metal electrolysis: 0.001 kg; lognormal variance with pedigree 0.1287, pedigree (5,5,5,3,4)
  Based on Table 5.8 in Part III in Classen et al. (2009). The amount for the geography GLO is used (1 kg per tonne of copper produced).
  properties: carbon content, fossil 0.865971, dry mass 1 kg, wet mass 1 kg
- blast furnace sludge: -0.39025, -0.0592691 kg (2 suppliers, which the file names only by identifier); sum of these -0.449519 kg; = 0.632043620290793/3.81656249874126*copper_concentrate_amount*0.78; normal variance with pedigree 0.242945, pedigree (3,3,5,3,1)
  Taken from the previous version of this dataset (published in version 3.7.1 of the ecoinvent database) and scaled based on the copper concentrate input amount. Proxy for flue gas scrubbing residue. The amount has been further scaled to obtain mass balance.
  production volume
    Calculated from copper anode annual production volume multiplied by the amount of blast furnace sludge produced per kg of copper anode.
  properties: aluminium content 0.0162734, calcium content 0.0528292, dry mass 0.914 kg, iron content 0.285273, magnesium content 0.021402, oxygen content 0.1123, silicon content 0.0410655, sodium content 0.00329717, sulfur content 0.010133, water content 0.0940919, wet mass 1 kg, zinc content 0.0150255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
  note on aluminium content: The value of 'aluminium content' is documented in Turner & Symeonidis, 2020. Reference: Turner David & Symeonidis Avraam, 2020, Life cycle inventories of the treatment of iron and steelmaking by-products, ecoinvent association, Zürich, Switzerland
  note on calcium content: The value of 'calcium content' is documented in Turner & Symeonidis, 2020. Reference: Turner David & Symeonidis Avraam, 2020, Life cycle inventories of the treatment of iron and steelmaking by-products, ecoinvent association, Zürich, Switzerland
  note on iron content: The value of 'iron content' is documented in Turner & Symeonidis, 2020. Reference: Turner David & Symeonidis Avraam, 2020, Life cycle inventories of the treatment of iron and steelmaking by-products, ecoinvent association, Zürich, Switzerland
  note on magnesium content: The value of 'magnesium content' is documented in Turner & Symeonidis, 2020. Reference: Turner David & Symeonidis Avraam, 2020, Life cycle inventories of the treatment of iron and steelmaking by-products, ecoinvent association, Zürich, Switzerland
  note on oxygen content: The value of 'oxygen content' is documented in Turner & Symeonidis, 2020. Reference: Turner David & Symeonidis Avraam, 2020, Life cycle inventories of the treatment of iron and steelmaking by-products, ecoinvent association, Zürich, Switzerland
  note on silicon content: The value of 'silicon content' is documented in Turner & Symeonidis, 2020. Reference: Turner David & Symeonidis Avraam, 2020, Life cycle inventories of the treatment of iron and steelmaking by-products, ecoinvent association, Zürich, Switzerland
  note on sodium content: The value of 'sodium content' is documented in Turner & Symeonidis, 2020. Reference: Turner David & Symeonidis Avraam, 2020, Life cycle inventories of the treatment of iron and steelmaking by-products, ecoinvent association, Zürich, Switzerland
  note on sulfur content: The value of 'sulfur content' is documented in Turner & Symeonidis, 2020. Reference: Turner David & Symeonidis Avraam, 2020, Life cycle inventories of the treatment of iron and steelmaking by-products, ecoinvent association, Zürich, Switzerland
  note on zinc content: The value of 'zinc content' is documented in Turner & Symeonidis, 2020. Reference: Turner David & Symeonidis Avraam, 2020, Life cycle inventories of the treatment of iron and steelmaking by-products, ecoinvent association, Zürich, Switzerland
- copper concentrate, sulfide ore: 3.48 kg; name copper_concentrate_amount; normal variance with pedigree 0.0472237, pedigree (2,2,5,3,1)
  Based on Table 5.8 in Part III in Classen et al. (2009). The amount for the geography GLO is used (3.48 tonnes per tonne of copper produced).
  properties: dry mass 0.9 kg, water content 0.111111, wet mass 1 kg
- copper slag: -1.404 kg; name copper_slag_amount; = 1.8*0.78; normal variance with pedigree 0.199554, pedigree (3,3,2,3,1)
  Based on Table 5.8 in Part III in Classen et al. (2009). The amount for the geography GLO is used (1.8 t per tonne of copper produced). The amount has been further scaled to obtain mass balance.
  production volume
    Calculated from copper anode annual production volume multiplied by the amount of copper slag produced per kg of copper anode.
  properties: aluminium content 0.0267, calcium content 0.052382, chromium content 0.011599, copper content 0.00807, dry mass 1 kg, iron content 0.046421, molybdenum content 0.00891524, potassium content 0.0317, silicon content 0.6496, sodium content 0.008, tungsten content 0.23999, wet mass 1 kg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
- electricity, high voltage: 0.0211227, 0.000758327, 0.00143995, 0.000621996, 0.0306183, 0.0129528, 0.00121118, 0.00184135, 0.0040525, 0.00217687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 kWh (65 suppliers, which the file names only by identifier); sum of these 0.850326 kWh; lognormal variance with pedigree 0.0034, pedigree (2,2,3,3,1)
  Value based on Table 7 in Turner & Hischier (2020). The electricity consumption reported in fuel equivalents is converted to kWh assuming a 38% power plant efficiency (assumption used in the underlying source, see report for more details).
- heat, district or industrial, natural gas: 0.000727683, 0.0939079, 0.618885 MJ (3 suppliers, which the file names only by identifier); sum of these 0.713521 MJ; = 5.36481780947673*0.133; lognormal variance with pedigree 0.0034, pedigree (2,2,3,3,1)
  Value based on Table 7 in Turner & Hischier (2020). The fossil energy input is split between natural gas and other than natural gas based on the split reported in Table 5.8 in Part III in Classen et al. (2009) for the pre-treatment and reduction steps in the region GLO.
  properties: heating value, net 1 MJ
- heat, district or industrial, other than natural gas: 4.64283, 0.00810722, 0.00035713 MJ (3 suppliers, which the file names only by identifier); sum of these 4.6513 MJ; = 5.36481780947673*0.867; lognormal variance with pedigree 0.0034, pedigree (2,2,3,3,1)
  (same comment as for heat, district or industrial, natural gas)
  properties: heating value, net 1 MJ
- lime, packed: 0.00314341, 0.246857 kg (2 suppliers, which the file names only by identifier); sum of these 0.25 kg; lognormal variance with pedigree 0.0808, pedigree (5,2,5,3,1)
  Based on Classen et al. (2009), 250 kg of limestone per tonne of copper are assumed to be required.
  properties: carbon content, fossil 0.117492, dry mass 0.998 kg, water content 0.00200401, wet mass 1 kg
- non-ferrous metal smelter: 1.05652e-11 unit; lognormal variance with pedigree 0.3502, pedigree (3,2,5,3,3)
  Value taken from 'copper production, primary', GLO, in version 3.6 of the ecoinvent database.
- oxygen, liquid: 0.38599 kg; name oxygen_amount; = 290/1000*1.331; lognormal variance with pedigree 0.0414, pedigree (2,2,5,3,1)
  Based on Table 5.8 in Part III in Classen et al. (2009). The amount for the geography GLO is used (290 Nm3 per tonne of copper produced). The density of oxygen is 1.331 kg per m3 at normal temperature and pressure conditions.
  properties: dry mass 1 kg, wet mass 1 kg
- silica sand: 0.831 kg; lognormal variance with pedigree 0.0808, pedigree (5,2,5,3,1)
  Based on Table 5.8 in Part III in Classen et al. (2009). The amount for the geography GLO is used (831 kg per tonne of copper produced).
  properties: dry mass 0.99 kg, water content 0.010101, wet mass 1 kg
- sulfuric acid: -2.74 kg; name sulfuric_acid_amount; = 220/1000 + 2.52; lognormal variance with pedigree 0.0414, pedigree (2,2,5,3,1)
  Based on Table 5.8 in Part III in Classen et al. (2009). The amount for the geography GLO is used. 220 kg of sulfuric acid is produced during the pre-treatment step, while 2.52 tonnes are produced during the reduction step (both values are per tonne of copper produced).
  production volume
    Calculated from copper anode annual production volume multiplied by the amount of sulfuric acid produced per kg of copper anode.
  properties: dry mass 1 kg, price 0.063 EUR2005, wet mass 1 kg
- wastewater, unpolluted: -0.00484855, -2.3447e-5 m3 (2 suppliers, which the file names only by identifier); sum of these -0.004872 m3; = copper_concentrate_amount/1000*1.4; lognormal variance with pedigree 0.0414, pedigree (2,2,5,3,1)
  Based on Classen et al. (2009). 1.4 m3 of wastewater per tonne of copper concentrate input is assumed to be released (based on PGM operations). The exchange for unpolluted wastewater is used as the emissions to water are reported separately.
  production volume
    Calculated from copper anode annual production volume multiplied by the amount of wastewater produced per kg of copper anode.
  properties: carbon content, fossil 0.00178991, carbon content, non-fossil 0.00178991, dry mass 0.337476 kg, water content 2962.17, wet mass 1000 kg
  note on carbon content, fossil: Assumed to be like in tap water. Bicarbonate content is 2.93 mol/m3. CO2 content is 0.1 mol/m3 (ecoinvent v2.2 report 8, Tab 93.1).

## Inputs from nature
- Oxygen [natural resource, in air]: 0.74737 kg; = sulfuric_acid_amount*0.3263 + sulfur_dioxide_amount*0.4995 - oxygen_amount; lognormal variance with pedigree 0.2106, pedigree (5,5,5,5,5)
  Represents oxygen that is supplied through compressed air (not modelled as an input, since the energy requirements are already considered in the energy inputs). It is calculated as the sum of oxygen contained in the sulfur dioxide that is converted to sulfuric acid and the oxygen contained in the sulfur dioxide emitted to air, minus the amount of pure oxygen that is supplied.
- Water, river [natural resource, in water]: 0.00537479 m3; = copper_concentrate_amount/1000*1.4 + sulfuric_acid_amount*0.1835/1000; lognormal variance with pedigree 0.0414, pedigree (2,2,5,3,1)
  Based on Classen et al. (2009), 1.4 m3 of water per tonne of copper concentrate input is assumed to be used (based on primary nickel production). The water consumed by the production of sulfuric acid is added to that amount.

## Emissions to nature
- Antimony ion [air, non-urban air or from high stacks]: 0.000125 kg; = 125/1000000; lognormal variance with pedigree 0.6987, pedigree (2,1,5,3,3)
  Based on Table 5.9 in Part III in Classen et al. (2009), 125 g of Antimony is emitted to air per tonne of copper produced with limited control.
- Arsenic ion [air, non-urban air or from high stacks]: 0.001 kg; = 1000/1000000; lognormal variance with pedigree 0.7002, pedigree (3,2,5,3,3)
  Based on Table 5.9 in Part III in Classen et al. (2009), 1000 g of Arsenic is emitted to air per tonne of copper produced with limited control.
- Cadmium II [air, non-urban air or from high stacks]: 0.00035 kg; = 350/1000000; lognormal variance with pedigree 0.7002, pedigree (3,2,5,3,3)
  Based on Table 5.9 in Part III in Classen et al. (2009), 350 g of Cadmium is emitted to air per tonne of copper produced with limited control.
- Carbon dioxide, fossil [air, non-urban air or from high stacks]: 0.11 kg; = 0.44*lime_amount; lognormal variance with pedigree 0.0508, pedigree (3,2,5,3,3)
  Based on Classen et al. (2009). The calcination of lime results in the emission of 0.44 t CO2 per tonne of lime added.
- Carbon monoxide, fossil [air, non-urban air or from high stacks]: 3e-5 kg; = 0.03/1000; lognormal variance with pedigree 0.7002, pedigree (3,2,5,3,3)
  Based on Table 5.10 in Part III in Classen et al. (2009), 0.03 kg of carbon monoxide is emitted to air per tonne of copper produced.
- Chromium III [air, non-urban air or from high stacks]: 1e-6 kg; = 1/1000000; lognormal variance with pedigree 0.7002, pedigree (3,2,5,3,3)
  Based on Table 5.9 in Part III in Classen et al. (2009), 1 g of Chromium is emitted to air per tonne of copper produced with limited control.
- Copper ion [air, non-urban air or from high stacks]: 0.00275 kg; = 2750/1000000; lognormal variance with pedigree 0.7002, pedigree (3,2,5,3,3)
  Based on Table 5.9 in Part III in Classen et al. (2009), 2750 g of Copper is emitted to air per tonne of copper produced with limited control.
- Dioxins, measured as 2,3,7,8-tetrachlorodibenzo-p-dioxin [air, non-urban air or from high stacks]: 2e-12 kg; = 0.000000002/1000; lognormal variance with pedigree 0.0902, pedigree (3,2,5,3,3)
  Based on 'copper production, primary' in version 3.6 of the ecoinvent database.
- Lead II [air, non-urban air or from high stacks]: 0.0025 kg; = 2500/1000000; lognormal variance with pedigree 0.7002, pedigree (3,2,5,3,3)
  Based on Table 5.9 in Part III in Classen et al. (2009), 2500 g of Lead is emitted to air per tonne of copper produced with limited control.
- Manganese II [air, non-urban air or from high stacks]: 0.0003 kg; = 300/1000000; lognormal variance with pedigree 0.7002, pedigree (3,2,5,3,3)
  Based on Table 5.9 in Part III in Classen et al. (2009), 300 g of Manganese is emitted to air per tonne of copper produced with limited control.
- Mercury II [air, non-urban air or from high stacks]: 2e-6 kg; = 2/1000000; lognormal variance with pedigree 0.7002, pedigree (3,2,5,3,3)
  Based on Table 5.9 in Part III in Classen et al. (2009), 2 g of Mercury is emitted to air per tonne of copper produced with limited control.
- NMVOC, non-methane volatile organic compounds [air, non-urban air or from high stacks]: 1.5e-5 kg; = 0.015/1000; lognormal variance with pedigree 0.0902, pedigree (3,2,5,3,3)
  Based on Table 5.10 in Part III in Classen et al. (2009), 0.015 kg of VOC is emitted to air per tonne of copper produced.
- Nickel II [air, non-urban air or from high stacks]: 0.00195 kg; = 1950/1000000; lognormal variance with pedigree 0.7002, pedigree (3,2,5,3,3)
  Based on Table 5.9 in Part III in Classen et al. (2009), 1950 g of Nickel is emitted to air per tonne of copper produced with limited control.
- Particulate Matter, < 2.5 um [air, non-urban air or from high stacks]: 5e-7 kg; = 0.0005/1000; lognormal variance with pedigree 0.3502, pedigree (3,2,5,3,3)
  Based on Table 5.10 in Part III in Classen et al. (2009), 0.0005 kg of PM < 2.5 is emitted to air per tonne of copper produced.
- Particulate Matter, > 10 um [air, non-urban air or from high stacks]: 0.0001 kg; = 0.1/1000; lognormal variance with pedigree 0.0902, pedigree (3,2,5,3,3)
  Based on Table 5.10 in Part III in Classen et al. (2009), 0.1 kg of PM > 10um is emitted to air per tonne of copper produced.
- Particulate Matter, > 2.5 um and < 10um [air, non-urban air or from high stacks]: 0.0003 kg; = 0.3/1000; lognormal variance with pedigree 0.1702, pedigree (3,2,5,3,3)
  Based on Table 5.10 in Part III in Classen et al. (2009), 0.3 kg of PM > 2.5 and < 10um is emitted to air per tonne of copper produced.
- Selenium IV [air, non-urban air or from high stacks]: 0.0001 kg; = 100/1000000; lognormal variance with pedigree 0.7002, pedigree (3,2,5,3,3)
  Based on Table 5.9 in Part III in Classen et al. (2009), 100 g of Selenium is emitted to air per tonne of copper produced with limited control.
- Sulfur dioxide [air, non-urban air or from high stacks]: 0.479076 kg; name sulfur_dioxide_amount; = 871.047/1000*(1 - 0.45); lognormal variance with pedigree 0.0508, pedigree (3,2,5,3,3)
  Calculated based on the smelter types provided in Table C1 in Turner & Hischier (2020) and based on the technology-specific SO2 emissions used in Classen et al. (2009). Based on Classen et al. (2009), for reverberatory furnaces, an emission of 2500 kg SO2/t Cu produced is assumed, while an emission of 150 kg SO2/t Cu produced is assumed for all other technologies. For cases where a mix of reverberatory and one or more other smelter types are reported in Table C1 in Turner & Hischier (2020), the emission factor for reverberatory furnaces is used. Additionally, based on Classen et al. (2009), an abatement of 45% is considered (value for the geography GLO).
- Tin ion [air, non-urban air or from high stacks]: 0.000125 kg; = 125/1000000; lognormal variance with pedigree 0.7002, pedigree (3,2,5,3,3)
  Based on Table 5.9 in Part III in Classen et al. (2009), 125 g of Tin is emitted to air per tonne of copper produced with limited control.
- Vanadium V [air, non-urban air or from high stacks]: 7.5e-6 kg; = 7.5/1000000; lognormal variance with pedigree 0.7002, pedigree (3,2,5,3,3)
  Based on Table 5.9 in Part III in Classen et al. (2009), 7.5 g of Vanadium is emitted to air per tonne of copper produced with limited control.
- Zinc II [air, non-urban air or from high stacks]: 0.00075 kg; = 750/1000000; lognormal variance with pedigree 0.7002, pedigree (3,2,5,3,3)
  Based on Table 5.9 in Part III in Classen et al. (2009), 750 g of Zinc is emitted to air per tonne of copper produced with limited control.
- Arsenic ion [water, surface water]: 9.11064e-8 kg; = 0.0187/1000*wastewater_amount; lognormal variance with pedigree 0.6901, pedigree (1,1,5,3,1)
  Based on Table 5.11 in Part III in Classen et al. (2009), 0.0187 g of Arsenic is released per m3 of wastewater effluent.
- Cadmium II [water, surface water]: 1.33006e-8 kg; = 0.00273/1000*wastewater_amount; lognormal variance with pedigree 0.6901, pedigree (1,1,5,3,1)
  Based on Table 5.11 in Part III in Classen et al. (2009), 0.00273 g of Cadmium is released per m3 of wastewater effluent.
- Chromium III [water, surface water]: 1.41288e-7 kg; = 0.029/1000*wastewater_amount; lognormal variance with pedigree 0.6901, pedigree (1,1,5,3,1)
  Based on Table 5.11 in Part III in Classen et al. (2009), 0.029 g of Chromium is released per m3 of wastewater effluent.
- Copper ion [water, surface water]: 2.56754e-7 kg; = 0.0527/1000*wastewater_amount; lognormal variance with pedigree 0.6901, pedigree (1,1,5,3,1)
  Based on Table 5.11 in Part III in Classen et al. (2009), 0.0527 g of Copper is released per m3 of wastewater effluent.
- Lead II [water, surface water]: 7.7952e-8 kg; = 0.0160/1000*wastewater_amount; lognormal variance with pedigree 0.6901, pedigree (1,1,5,3,1)
  Based on Table 5.11 in Part III in Classen et al. (2009), 0.0160 g of Lead is released per m3 of wastewater effluent.
- Mercury II [water, surface water]: 1.41288e-9 kg; = 0.00029/1000*wastewater_amount; lognormal variance with pedigree 0.6901, pedigree (1,1,5,3,1)
  Based on Table 5.11 in Part III in Classen et al. (2009), 0.00029 g of Mercury is released per m3 of wastewater effluent.
- Nickel II [water, surface water]: 1.03286e-7 kg; = 0.0212/1000*wastewater_amount; lognormal variance with pedigree 0.6901, pedigree (1,1,5,3,1)
  Based on Table 5.11 in Part III in Classen et al. (2009), 0.0212 g of Nickel is released per m3 of wastewater effluent.
- Tin ion [water, surface water]: 1.41288e-7 kg; = 0.029/1000*wastewater_amount; lognormal variance with pedigree 0.6901, pedigree (1,1,5,3,1)
  Based on Table 5.11 in Part III in Classen et al. (2009), 0.029 g of Tin is released per m3 of wastewater effluent.
- Zinc II [water, surface water]: 4.13146e-7 kg; = 0.0848/1000*wastewater_amount; lognormal variance with pedigree 0.6901, pedigree (1,1,5,3,1)
  Based on Table 5.11 in Part III in Classen et al. (2009), 0.0848 g of Zinc is released per m3 of wastewater effluent.

## Sampling procedure
All inputs, apart from energy, and emissions to the environment are based on Classen et al. (2009). The data is based on Tables 5.8 to 5.11 in Part III. For the region-specific values, the values for the region GLO are used. For the emissions to air taken from Table 5.9, the values with limited control are used.

The values for electrical and thermal energy demand have been adjusted based on the types of smelters in operation in the geography modelled in this dataset, taken from the USGS World Copper Smelters database (Feliciano & González, 2003), and estimated energy demand of different copper smelter types (Coursol et al. 2015).

The emission of sulfur dioxide is calculated based on the shares of the types of smelters and based on the emission factors per smelter type given in Classen et al. (2009).

The amounts and composition (exchange properties) of 'copper, anode', 'copper slag' and 'blast furnace sludge' (the latter of which was used here as a proxy for flue dust) were estimated based on a global material flow analysis of copper production. For more information, please refer to the accompanying documentation (see Turner & Hischier, 2020).

References
Classen M., Althaus H.-J., Blaser S., Tuchschmid M., Jungbluth N., Doka G., Faist Emmenegger M. and Scharnhorst W. (2009) Life Cycle Inventories of Metals. Final report ecoinvent data v2.1, No 10. EMPA Dübendorf, Swiss Centre for Life Cycle Inventories, Dübendorf, CH, Online-Version under: www.ecoinvent.ch.
Coursol, P., Mackey, P. J., Kapusta, J. P. T., & Valencia, N. C. (2015). Energy Consumption in Copper Smelting: A New Asian Horse in the Race. JOM, 67(5), 1066-1074.
Feliciano, C. S. L. & González, E. (2003). Map and Table of World Copper Smelters (online). U.S. Geological Survey. Available from: https://pubs.usgs.gov/of/2003/of03-075/ (accessed 27.12.2018).
Turner, D. A. & Hischier, R. (2020). Life cycle inventories of pyrometallurgical copper production and anode slime processing. Empa, St. Gallen, Switzerland.
