# beet sugar production

Dataset: EcoSpold 2, unit process
Geography: CH
Time period: 1998-01-01 to 2022-12-31
Technology level: current
Classification: EcoSpold01Categories: food industry/processing
Classification: ISIC rev.4 ecoinvent: 1072:Manufacture of sugar
Tags: ConvertedDataset
Scenario: Business-as-Usual
System model: Substitution, consequential, long-term
Share of production covered: 0 %
Generated by: Edgard Gnansounou
Published in: Jungbluth N. 2007
Database: ecoinvent
isCopyrightProtected: true

## General comment
Inventory refers to the production of 1 kg sugar, respectively 1 kg of molasses (72% dry matter) and 1 kg of pulps (25.6% dry matter). The multioutput-process 'sugar beet, in sugar refinery' delivers the co-products 'sugar, from sugar beet, at sugar refinery' and 'molasses, from sugar beet, at sugar refinery' and 'pulps, from sugar beet, at sugar refinery. Economic allocation with allocation factor for common stages of 91.7% to sugar, 4.5% to molasses and 3.8% to pulps. Allocation is done according to carbon balance for CO2 emissions.
[This dataset was already contained in the ecoinvent database version 2. It was not individually updated during the transfer to ecoinvent version 3. Life Cycle Impact Assessment results may still have changed, as they are affected by changes in the supply chain, i.e. in other datasets. This dataset was generated following the ecoinvent quality guidelines for version 2. It may have been subject to central changes described in the ecoinvent version 3 change report (http://www.ecoinvent.org/database/ecoinvent-version-3/reports-of-changes/), and the results of the central updates were reviewed extensively. The changes added e.g. consistent water flows and other information throughout the database. The documentation of this dataset can be found in the ecoinvent reports of version 2, which are still available via the ecoinvent website. The change report linked above covers all central changes that were made during the conversion process.]

## Included activities end
This dataset includes the transport of sugar beets to the sugar refinery, and the processing of sugar beets to sugar, molasses (72% dry matter) and pulps (25.6% dry matter). System boundary is at the sugar refinery. Treatment of waste effluents is included. Packaging of the sugar is not included.

## Geography
Data is from sugar producer in CH, industrial data

## Technology
Sweet juice is extracted from the sugar beets by diffusion. The juice is then purified and crystallized to sugar. Molasses come as a by-product of the crystallization process.

## Time period
Data from 1998 to 2005, typical technology for the production of sugar from sugar beet

## Parameters
- fraction, process water, to air: 0.34 dimensionless; name fraction_PW_to_air; lognormal variance with pedigree 0.092025, pedigree (4,4,3,2,4)
  Literature value (Statistics Canada, 2007 & Shaffer, K.H., 2008, Consumptive water use in the Great Lakes Basin, USGS) (Vionnet, S., Quantis Water Database - Technical Report, 2012).
- fraction, tap water, to air: 0.34 dimensionless; name fraction_TW_to_air; = fraction_PW_to_air; lognormal variance with pedigree 0.092025, pedigree (4,4,3,2,4)
  Calculated value. See comment in the other parametres present in this dataset. Tap water is considered to be always used as process water, thus process water fractions to air are applied to all tap water input flows to calculate the amount of water consumed in the processes.

## Reference product
- sugar, from sugar beet: 1 kg; By-product classification allocatable product; CPC 23512: Beet sugar
  EcoSpold01Location=CH
  production volume 2.28415e8 kg
    Production of sugar was 250 kt in Switzerland in 2004
    Calculated from sugar beet production using conversion efficiency in ecoinvent dataset
  property carbon content, non-fossil 0.44
    Sugar are carbohydrates, with a carbon content of 0.44 kg/kg dry mass. From: ecoinvent v2.2 report, n 15a, pg 40
  property price 0.436 EUR2005
    Calculated value based on data from United Nations Commodity Trade Statistics Database (comtrade.un.org). UN comtrade category: 170199 Refined sugar, in solid form, nes, pure sucrose. Year 2005. Using exchange rate of 1EURO = 1.209 USD. Average of price of import into 5 main markets (EU, US, JP, IN and CN). The price of raw sugar, from sugarbeet calcualted using the values from the comtrade database is 0.71 EUR/kg, but there are not many values available so the resulting number has very high uncertainty.
  properties: EcoSpold01Allocation_undefined_1 100, EcoSpold01Allocation_undefined_10 91.97, EcoSpold01Allocation_undefined_11 95.34, EcoSpold01Allocation_undefined_12 95.34, EcoSpold01Allocation_undefined_13 95.34, EcoSpold01Allocation_undefined_14 95.34, EcoSpold01Allocation_undefined_15 95.34, EcoSpold01Allocation_undefined_16 95.34, EcoSpold01Allocation_undefined_17 95.34, EcoSpold01Allocation_undefined_18 92.63, EcoSpold01Allocation_undefined_19 88.24, EcoSpold01Allocation_undefined_2 100, EcoSpold01Allocation_undefined_20 93.79, EcoSpold01Allocation_undefined_23 91.9671, EcoSpold01Allocation_undefined_24 91.9671, EcoSpold01Allocation_undefined_3 0, EcoSpold01Allocation_undefined_4 91.75, EcoSpold01Allocation_undefined_5 91.75, EcoSpold01Allocation_undefined_6 91.75, EcoSpold01Allocation_undefined_7 93.7, EcoSpold01Allocation_undefined_8 90.07, EcoSpold01Allocation_undefined_9 90.07, carbon allocation 0.44 kg, carbon content 0.44, carbon content, fossil 0, dry mass 1 kg, water content 0, water in wet mass 0 kg, wet mass 1 kg

## Inputs from technosphere
- chemical, inorganic: 0.000852045 kg; lognormal variance with pedigree 0.05, pedigree (1,1,5,1,1)
  Environmental report of Swiss sugar manufacturer
  EcoSpold01Location=GLO
  Uncertainty: Environmental report of Swiss sugar manufacturer
  properties: carbon content, fossil 0.003, dry mass 1 kg, wet mass 1 kg
  note on carbon content, fossil: This dataset is an unweighted average of 20 inorganic substances (listed in Tab 88.1, ecoinvent v2.2 report 8, part II), being part of the top100 chemicals included in this database. The C-content has also been calculated as an unweighted average of the C content of the substances composing this dataset.
- chemical, organic: 0.00059171 kg; lognormal variance with pedigree 0.05, pedigree (1,1,5,1,1)
  (same comment as for chemical, inorganic)
  properties: carbon content, fossil 0.628, dry mass 1 kg, heating value, net 19.03 MJ, wet mass 1 kg
  note on carbon content, fossil: This dataset is an unweighted average of 20 organic substances (listed in Tab 88.1, ecoinvent v2.2 report 8, part II), being part of the top100 chemicals included in this database. The C-content has also been calculated as an unweighted average of the C content of the substances composing this dataset.
- coke: 0.0159997 MJ; lognormal variance with pedigree 0.05, pedigree (1,1,5,1,1)
  EcoSpold01Location=RER
  Environmental report of Swiss sugar manufacturer
  Uncertainty: Environmental report of Swiss sugar manufacturer
  properties: carbon content, fossil 0.869149, dry mass 0.0328671 kg, heating value, net 28.6 MJ, water content 0.0638298, wet mass 0.034965 kg
  note on carbon content, fossil: 81.7% C and 6% water in wet mass (ecoinvent v2.1 report 6_VI Table 7.1)
- electricity, medium voltage: 0.211985 kWh; lognormal variance with pedigree 0.05, pedigree (1,1,5,1,1)
  EcoSpold01Location=CH
  Environmental report of Swiss sugar manufacturer
  Uncertainty: Environmental report of Swiss sugar manufacturer
- heat, district or industrial, natural gas: 1.89499 MJ; lognormal variance with pedigree 0.05, pedigree (1,1,5,1,1)
  Environmental report of Swiss sugar manufacturer
  EcoSpold01Location=RER
  Uncertainty: Environmental report of Swiss sugar manufacturer
  properties: heating value, net 1 MJ
- lime: 0.185001 kg; lognormal variance with pedigree 0.05, pedigree (1,1,5,1,1)
  (same comment as for electricity, medium voltage)
  properties: carbon content, fossil 0.120005, dry mass 1 kg, wet mass 1 kg
- limestone residue: -0.233134 kg; lognormal variance with pedigree 0.01, pedigree (1,1,1,1,1)
  Environmental report of Swiss sugar manufacturer
  EcoSpold01Location=CH
  Uncertainty: Environmental report of Swiss sugar manufacturer
  production volume
    Calculated from the production volume of sugar, from sugar beet in proportion to the respective output amounts.
  properties: carbon content, fossil 0.120005, dry mass 0.995 kg, water content 0.00502513, wet mass 1 kg
  note on carbon content, fossil: The waste is characterised as 'calcium carbonate waste' (CaCO3)
- molasses, from sugar beet: -0.228998 kg
  EcoSpold01Location=CH
  production volume
    Production of sugar was 250 kt in Switzerland in 2004
    Calculated from sugar output (35.9 kg molasses (18% water) per 1000 kg sugar)
  properties: EcoSpold01Allocation_undefined_11 4.658, EcoSpold01Allocation_undefined_12 4.658, EcoSpold01Allocation_undefined_13 4.658, EcoSpold01Allocation_undefined_14 4.658, EcoSpold01Allocation_undefined_15 4.658, EcoSpold01Allocation_undefined_16 4.658, EcoSpold01Allocation_undefined_17 4.658, EcoSpold01Allocation_undefined_18 4.525, EcoSpold01Allocation_undefined_20 4.582, EcoSpold01Allocation_undefined_21 100, EcoSpold01Allocation_undefined_3 29.2, EcoSpold01Allocation_undefined_7 4.578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
- soda ash, light: 0.00220116 kg; lognormal variance with pedigree 0.05, pedigree (1,1,5,1,1)
  (same comment as for coke)
  properties: carbon content, fossil 0.0517241, dry mass 1 kg, heating value, net 3.43 MJ, wet mass 1 kg
- sugar beet: 6.37186 kg; lognormal variance with pedigree 0.05, pedigree (1,1,5,1,1)
  (same comment as for electricity, medium voltage)
  properties: carbon content, non-fossil 0.433043, dry mass 0.23 kg, water content 3.34783, wet mass 1 kg
  note on carbon content, non-fossil: Composition data obtained from Beets raw, in (http://www.nal.usda.gov/fnic/foodcomp/search/). First, composition data were refered to 1 kg dry mass. Then, C-contents were calculated considering a C-content/dry mass of 46% in carbohydrates (including fibres), 53% in proteins and 75% in fats. All data from "Evolutionary and Biochemical Aspects", A.D. Kay and T. Vrede (in Global Ecology, 2010, Elsevier B.V., S.E. Jørgensen Ed.).
- sugar beet pulp: -1.29999 kg
  EcoSpold01Location=CH
  production volume
    Production of sugar was 250 kt in Switzerland in 2004
    Calculated from sugar output (204 kg pulp (75% water) per 1000 kg sugar)
  properties: EcoSpold01Allocation_undefined_10 3.54, EcoSpold01Allocation_undefined_19 7.555, EcoSpold01Allocation_undefined_22 100, EcoSpold01Allocation_undefined_23 3.53995, EcoSpold01Allocation_undefined_24 3.53995, EcoSpold01Allocation_undefined_3 70.8, EcoSpold01Allocation_undefined_4 3.773, EcoSpold01Allocation_undefined_5 3.773, EcoSpold01Allocation_undefined_6 3.773, EcoSpold01Allocation_undefined_8 5.597, EcoSpold01Allocation_undefined_9 5.597, water content 3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
- sugar refinery: 1e-10 unit; lognormal variance with pedigree 0.35, pedigree (1,1,5,1,1)
  EcoSpold01Location=GLO
  Environmental report of Swiss sugar manufacturer
  Uncertainty: Environmental report of Swiss sugar manufacturer
- sulfuric acid: 0.000402364 kg; lognormal variance with pedigree 0.05, pedigree (1,1,5,1,1)
  (same comment as for coke)
  properties: dry mass 1 kg, wet mass 1 kg
- tap water: 7.00714 kg; name tap_water_input; lognormal variance with pedigree 0.05, pedigree (1,1,5,1,1)
  (same comment as for limestone residue)
  properties: carbon content, fossil 0.00178991, dry mass 0.000337476 kg, water content 2962.17, wet mass 1 kg
  note on carbon content, fossil: Bicarbonate content is 2.93 mol/m3. CO2 content is 0.1 mol/m3 (ecoinvent v2.2 report 8, Tab 93.1).
- transport, tractor and trailer, agricultural: 0.0637186 metric ton*km; lognormal variance with pedigree 0.17, pedigree (1,1,5,1,1)
  (same comment as for electricity, medium voltage)
- wastewater, average: -0.011096 m3; lognormal variance with pedigree 0.01, pedigree (1,1,1,1,1)
  (same comment as for electricity, medium voltage)
  production volume
    (same comment as for limestone residue)
  properties: carbon content, non-fossil 0.194039, dry mass 0.346837 kg, mass concentration, TOC 0.1091 kg/m3, mass concentration, calcium 0.039453 kg/m3, mass concentration, chlorine 0.030031 kg/m3, mass concentration, hydrogen 0.013365 kg/m3, mass concentration, nitrogen 0.031015 kg/m3, mass concentration, oxygen 0.069824 kg/m3, mass concentration, sodium 0.06456 kg/m3, mass concentration, sulfur 0.015602 kg/m3, water content 2882.2, wet mass 1000 kg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
  note on carbon content, non-fossil: 0.0673 kg TOC/m3 (Tab A.17, ecoinvent v2.2 report 13_I). TOC was considered as Total Carbon.

## Inputs from nature
- Carbon dioxide, in air [natural resource, in air]: 0.415235 kg; lognormal variance with pedigree 0.04, pedigree (1,1,5,1,1)
  Calculation, to close carbon balance
  Uncertainty: Calculation, to close carbon balance

## Emissions to nature
- Carbon dioxide, non-fossil [air, urban air close to ground]: 0.420473 kg; lognormal variance with pedigree 0.04, pedigree (1,1,5,1,1)
  Calculation, to close carbon balance
  Uncertainty: Calculation, to close carbon balance
- Water [air, unspecified]: 0.00238243 m3; name water_to_air_unspecified; = (tap_water_input/1000*fraction_TW_to_air); lognormal variance with pedigree 0.0807, pedigree (2,2,5,1,1)
  Calculated value based on literature values and expert opinion. See comments in the parametres' comment field.
  property fraction, origin: fresh water 1; name fraction_origin_fresh_water
  property fraction, origin: salt water 0; name fraction_origin_salt_water
  property fraction, origin: unspecified 0; name fraction_origin_unspecified

## Review by Niels Jungbluth 2006-08-15
Passed.
none
