# wheat production

Dataset: EcoSpold 2, unit process
Geography: AU
Time period: 2009-01-01 to 2022-12-31
Technology level: current
Classification: ISIC rev.4 ecoinvent: 0111:Growing of cereals (except rice), leguminous crops and oil seeds
Tags: WFLDB
Scenario: Business-as-Usual
System model: Substitution, consequential, long-term
Generated by: Eliane Riedener
Published in: Nemecek T. 2015
Database: ecoinvent
isCopyrightProtected: true

## General comment
This dataset represents the production of 1 kg of wheat grains, at standard water content required for storage (15%). The average yield from 2009 - 2012 is 1.8 t/ha. The inputs of this dataset relate to a yield of 3.5 t/ha, which can be expected in a normal year. The data are representative for long fallow dryland winter wheat in the Central Zone (East) of New South Wales, which is the second largest wheat production area in Australia (30% of total production). Mineral NPK fertiliser input is 70-48-0 kg/ha. No organic fertilisers are applied. Total active ingredients (a.i.) applied as pesticides amount to 2.23 kg a.i./ha.
The dataset was modelled within the project 'World Food LCA database (WFLDB)'. The aim of this project was to provide inventories of a broad variety of agricultural products and processes and to cover for each product at least 50% of the global export market. The export share of winter wheat produced in Australia amounts to 11% of the global export (tonnage exported in 2010). The production system regarded in this dataset aimed at representing winter wheat produced in Australia for the export market.
PEF-Quality: data quality rating (DQR) = 1.5 (i.e. excellent quality). This dataset refers to an average situation; for specific situations exchanges might differ substantially due to site specific parameters

## Included activities start
This activity starts with soil cultivation after the harvest of the previous crop.

## Included activities end
This activity ends with the harvest of grains and their transport to the farm gate. The dataset includes all machine operations, corresponding infrastructure, fuel use and sheds. Machine operations are: soil cultivation (a mixture of no tillage and minimum tillage), sowing, fertilisation, pesticide application, harvesting, making and loading bales, and on-farm transport. Further, direct field emissions and land use change are included. Heavy metal uptake by the crop is considered. The inputs of seeds, fertilisers and pesticides as well as packaging of fertilisers and pesticides are considered. The dataset doesn't include emissions from manure storage because these are within the system boundary of animal production.

## Technology
Conventional production

## Parameters
- LUC_crop_specific: 1 dimensionless
  This parameter allows to switch between a 'crop specific' and a 'country specific' approach when calculating the LUC of a crop. By default, the chosen approach is 'crop specific', so the value of the parameter is 1. If you want to apply a 'country specific' approach, turn the parameter to 0.
- heavyMetalUptakeSwitch: 1 dimensionless

## Reference product
- wheat grain: 1 kg; By-product classification allocatable product; CPC 01112: Wheat, other
  Reference flow: Yield = 1847.7 kg/ha
  production volume 2.52773e10 kg
    Source: FAOSTAT. Average, 2009-2012
  property price 0.22 EUR2005
    Literature value. Based on SAFEX price of R 3,727 per tonne, source: SAGIS, 2018. Retrieved from: http://www.sagis.org.za/safex_historic.html, accessed 28May2018
  properties: carbon allocation 0.394911 kg, carbon content 0.464601, carbon content, fossil 0, carbon content, non-fossil 0.464601, dry mass 0.85 kg, water content 0.176471, water in wet mass 0.15 kg, wet mass 1 kg

## Inputs from technosphere
- application of plant protection product, by field sprayer: 0.00324728 ha; source Brock P. 2012; lognormal variance with pedigree 0.124664, pedigree (2,2,4,1,1)
  Literature value or expert estimation (Brock et al. 2012).
- combine harvesting: 8.45159e-5 ha; source Brock P. 2012; lognormal variance with pedigree 0.124177, pedigree (2,1,4,1,1)
  Literature value or expert estimation (Brock et al. 2012).
- cyclic N-compound: 4.01385e-5 kg; source Brock P. 2012; lognormal variance with pedigree 0.0138498, pedigree (2,2,4,1,1)
  Literature value or expert estimation (Brock et al. 2012).
  properties: carbon content, fossil 0.641962, dry mass 1 kg, wet mass 1 kg
- fertilising, by broadcaster: 3.58083e-5 ha; source Brock P. 2012; lognormal variance with pedigree 0.124177, pedigree (2,1,4,1,1)
  Literature value or expert estimation (Brock et al. 2012).
- glyphosate: 0.000783657 kg; source Brock P. 2012; lognormal variance with pedigree 0.0138498, pedigree (2,2,4,1,1)
  Literature value or expert estimation (Brock et al. 2012).
  properties: carbon content, fossil 0.214286, dry mass 1 kg, wet mass 1 kg
- inorganic nitrogen fertiliser, as N: 0.00595335 kg
  Calculated based on literature values or expert estimation: The total amount of nutrient (Brock et al. 2012) multiplied by the share of fertiliser type (Brock et al. 2012). See supporting documentation 'WFLDB-Documentation.pdf' chapter 'Fertiliser application' for L3 and L4 data (https://ecoquery.ecoinvent.org/File/Reports). Calculations for fertilizers from Mitchell (1999).
  Corresponds to 11.0 kg/ha
  properties: dry mass 1 kg, wet mass 1 kg
- inorganic phosphorus fertiliser, as P2O5: 0.0259782 kg
  Calculated based on literature values or expert estimation: The total amount of nutrient (Brock et al. 2012) multiplied by the share of fertiliser type (Brock et al. 2012). See supporting documentation 'WFLDB-Documentation.pdf' chapter 'Fertiliser application' for L3 and L4 data (https://ecoquery.ecoinvent.org/File/Reports). Calculations for fertilizers from Mitchell (1999).
  Corresponds to 48.0 kg/ha
  properties: dry mass 1 kg, wet mass 1 kg
- land use change, annual crop: 0.000213888 ha; = 0.000213887535855*LUC_crop_specific+0.000195865129621*(1-LUC_crop_specific)
  Calculated value. Land use change (LUC) combines land transformation areas calculated with the adapted 'Direct Land Use Change Assessment Tool' version 2014 developed by Blonk Consultants and the carbon losses from soil organic carbon (SOC) and vegetation (VEG) as calculated in ecoinvent v3. See 'WFLDB-Guidelines.pdf', available at https://ecoquery.ecoinvent.org/File/Reports.
- lime: 0.0170482 kg; source Brock P. 2012; lognormal variance with pedigree 0.124177, pedigree (2,1,4,1,1)
  Calculated based on literature values or expert estimation: The total amount of nutrient (Brock et al. 2012) multiplied by the share of fertiliser type (Brock et al. 2012). See supporting documentation 'WFLDB-Documentation.pdf' chapter 'Fertiliser application' for L3 and L4 data (https://ecoquery.ecoinvent.org/File/Reports).
  Corresponds to 31.5 kg/ha
  properties: carbon content, fossil 0.120005, dry mass 1 kg, wet mass 1 kg
- packaging, for fertilisers: 0.161823 kg; lognormal variance with pedigree 0.0592, pedigree (4,3,4,5,4)
  Total amount of active substance/s of fertilisers needed for the production of 'wheat grain' is calculated to be circa 8.09E-02 kg. Fertiliser/s used in this dataset is/are: 'lime', 'nitrogen fertiliser, as N', 'phosphate fertiliser, as P2O5', 'urea, as N'. The total amount of active substance/s is doubled in order to account for the packaging of the dilluted product of fertiliser/s that is/are applied. Therefore, 1.62E-01 kg of packaging for fertilisers is justified with this exchange.
  properties: carbon content, fossil 0.825301, dry mass 1 kg, heating value, net 25.01 MJ, price 0.0642 EUR2005, wet mass 1 kg
  note on carbon content, fossil: Considering a chemical formula (C2H4)n for polyethylene, carbon content-fossil is calculated to be 0.856286 kg of Carbon per kg of dry mass.
- packaging, for pesticides: 0.00241213 kg; lognormal variance with pedigree 0.0592, pedigree (4,3,4,5,4)
  Total amount of active substance/s of pesticides needed for the production of wheat grain is calculated to be circa 1.21E-03 kg. Pesticide/s used in this dataset is/are: 'cyclic N-compound', 'glyphosate', 'phenoxy-compound'. The total amount of active substance/s is doubled in order to account for the packaging of the dilluted product of pesticide/s that is/are applied. Therefore, 2.41E-03 kg of packaging for pesticides is justified with this exchange.
  properties: carbon content, fossil 0.85714, dry mass 1 kg, heating value, net 25.97 MJ, price 0.0642 EUR2005, wet mass 1 kg
- phenoxy-compound: 0.000382272 kg; source Brock P. 2012; lognormal variance with pedigree 0.0138498, pedigree (2,2,4,1,1)
  Literature value or expert estimation (Brock et al. 2012).
  properties: carbon content, fossil 0.532559, dry mass 1 kg, wet mass 1 kg
- sowing: 0.000850084 ha; source Brock P. 2012; lognormal variance with pedigree 0.124177, pedigree (2,1,4,1,1)
  Literature value or expert estimation (Brock et al. 2012).
- straw: -0.583428 kg
  Yield = 1078.0 kg/ha
  production volume
    Calculated from reference product production volume, reference product amount and byproduct amount.
  properties: carbon content, non-fossil 0.437377, dry mass 0.85 kg, heating value, net 14.25 MJ, price 0.012 EUR2005, water content 0.176471, wet mass 1 kg
  note on heating value, net: Literature value, Source: Phyllis2, database for (treated) biomass, algae, feedstocks for biogas production and biochar, https://phyllis.nl/Biomass/View/1271, ECN.TNO
- tillage, cultivating, chiselling: 0.000346079 ha; source Brock P. 2012; lognormal variance with pedigree 0.124177, pedigree (2,1,4,1,1)
  Literature value or expert estimation (Brock et al. 2012).
- transport, freight train: 0.00880035 metric ton*km
  This represent the transport of fertilizers that are directly linked to their supplying activities, to better represent the fertilizer mix of the activity. Transport distance based on US BTS Commodity Flow Surveys 1993, 1997, 2002, 2007, US Dep. Of Transportation, Bureau of Transportation Statistics.
- transport, freight, inland waterways, barge: 0.00148801 metric ton*km
  (same comment as for transport, freight train)
- transport, freight, lorry, unspecified: 0.00474184 metric ton*km
  This represent the transport of fertilizers that are directly linked to their supplying activities, to better represent the fertilizer mix of the activity. Transport distance based on US BTS Commodity Flow Surveys 1993, 1997, 2002, 2007, US Dep. Of Transportation, Bureau of Transportation Statistics. Of the total road transport, 6% is assumed to be by delivery van for goods with a large share of retail sale, and 3% for goods that are mainly sold via wholesale.
- transport, freight, sea, container ship: 0.0268513 metric ton*km
  This represent the transport of fertilizers that are directly linked to their supplying activities, to better represent the fertilizer mix of the activity. The total marine transport volume differentiated into major commodity groups based on data from FearnResearch (2001): Fearnley's Annual Review 2000. Oslo: Fearnley/AS, p. 1-78. The category 'Other cargo' accounts for 38% of total maritime transport volume and has been distributed on commodity groups based on the proportions of transport by rail and inland waterways.
  The total marine transport volume differentiated into major commodity groups based on data from FearnResearch (2001): Fearnley's Annual Review 2000. Oslo: Fearnley/AS, p. 1-78. The category 'Other cargo' accounts for 38% of total maritime transport volume and has been distributed on commodity groups based on the proportions in the marine import and export of the US in 2001-2010.
- transport, tractor and trailer, agricultural: 0.00684851 metric ton*km; lognormal variance with pedigree 0.162439, pedigree (4,1,4,1,1)
  Proxy: Extrapolated using a modified MEXALCA-approach (Roches et al. 2010; Nemecek et al. 2012). See supporting documentation 'WFLDB-Documentation.pdf' chapter 'Machinery processes' for L1 data (https://ecoquery.ecoinvent.org/File/Reports). Corresponds to 12.7tkm/ha.
- urea: 0.0684549 kg; source Brock P. 2012; lognormal variance with pedigree 0.124177, pedigree (2,1,4,1,1)
  The exchange has been updated from 'urea, as N' into 'urea' and therefore its amount has been scaled (multiplied) from 0.0319 kg by 2.1438 kg of 'urea' per kg of 'urea, as N'. Original comment of the exchange is: Calculated based on literature values or expert estimation: The total amount of nutrient (Brock et al. 2012) multiplied by the share of fertiliser type (Brock et al. 2012). See supporting documentation 'WFLDB-Documentation.pdf' chapter 'Fertiliser application' for L3 and L4 data (https://ecoquery.ecoinvent.org/File/Reports). Calculations for fertilizers from Mitchell (1999).
  Corresponds to 59.0 kg/ha
  properties: carbon content, fossil 0.2, dry mass 1 kg, wet mass 1 kg
- wheat seed, for sowing: 0.0216485 kg; source Brock P. 2012; lognormal variance with pedigree 0.124177, pedigree (2,1,4,1,1)
  property carbon content, non-fossil 0.464601; name wheat_seed_sowing_C_content_non_fossil
  property water content 0.176471; name wheat_seed_sowing_water_content; = wheat_seed_sowing_WWM/ wheat_seed_sowing_DM
  property water in wet mass 0.15 kg; name wheat_seed_sowing_WWM
  properties: dry mass 0.85 kg, wet mass 1 kg
  note on carbon content, non-fossil: Composition data obtained from Wheat, soft red winter, in (http://www.nal.usda.gov/fnic/foodcomp/search/). First, composition data were refered to 1 kg dry mass. Then, C-contents were calculated considering a C-content/dry mass of 46% in carbohydrates (including fibres), 53% in proteins and 75% in fats. All data from "Evolutionary and Biochemical Aspects", A.D. Kay and T. Vrede (in Global Ecology, 2010, Elsevier B.V., S.E. Jørgensen Ed.).

## Inputs from nature
- Carbon dioxide, in air [natural resource, in air]: 1.29318 kg; lognormal variance with pedigree 0.0138498, pedigree (2,2,4,1,1)
  CO2 uptake by biomass
- Energy, gross calorific value, in biomass [natural resource, biotic]: 15.0625 MJ; lognormal variance with pedigree 0.0138498, pedigree (2,2,4,1,1)
  Gross energy content is related to MJ/kg dry matter of product. Source: ecoinvent data.
- Occupation, annual crop [natural resource, land]: 5.42675 m2*year; lognormal variance with pedigree 0.0200616, pedigree (2,1,4,1,1)
  Related to the duration from harvest date of previous crop to harvest date of main crop: 366 days.
- Transformation, from arable land, unspecified use [natural resource, land]: 5.41213 m2; lognormal variance with pedigree 0.0442144, pedigree (2,1,4,1,1)
  10000 m2 divided by the life time of the crop.
- Transformation, to arable land, unspecified use [natural resource, land]: 5.41213 m2; lognormal variance with pedigree 0.0442144, pedigree (2,1,4,1,1)
  10000 m2 divided by the life time of the crop.

## Emissions to nature
- Ammonia [air, non-urban air or from high stacks]: 0.00907507 kg; source EEA 2013; lognormal variance with pedigree 0.0447216, pedigree (2,2,4,1,1)
  Calculated value - EMEP/EEA (2013). See 'WFLDB-Guidelines.pdf', available at https://ecoquery.ecoinvent.org/File/Reports.
- Carbon dioxide, fossil [air, non-urban air or from high stacks]: 0.0576338 kg; lognormal variance with pedigree 0.0138498, pedigree (2,2,4,1,1)
  Calculated value - CO2 emissions from urea and lime. See 'WFLDB-Guidelines.pdf', available at https://ecoquery.ecoinvent.org/File/Reports.
- Dinitrogen monoxide [air, non-urban air or from high stacks]: 0.000881654 kg; source IPCC 2006; lognormal variance with pedigree 0.124664, pedigree (2,2,4,1,1)
  Calculated value - IPCC (2006). See 'WFLDB-Guidelines.pdf', available at https://ecoquery.ecoinvent.org/File/Reports.
- Nitrogen oxides [air, non-urban air or from high stacks]: 0.00149375 kg; source EEA 2013; lognormal variance with pedigree 0.124664, pedigree (2,2,4,1,1)
  Calculated value - EEA/EMEP (2013). See 'WFLDB-Guidelines.pdf', available at https://ecoquery.ecoinvent.org/File/Reports.
- 2,4-D [soil, agricultural]: 0.000191136 kg; lognormal variance with pedigree 0.0447216, pedigree (2,2,4,1,1)
  Calculated value - 100% emission in soil. See 'WFLDB-Guidelines.pdf', available at https://ecoquery.ecoinvent.org/File/Reports.
- Cadmium II [soil, agricultural]: 1.31915e-6 kg; = 1.60448124696e-06 + ( - 8.70000541213e-08 - 1.98333062727e-07)*heavyMetalUptakeSwitch; source Freiermuth R.  2006
  Comment on mathematicalRelation:
  1.60448124696e-06 from Calculated value - Freiermuth (2006). See 'WFLDB-Guidelines.pdf', available at https://ecoquery.ecoinvent.org/File/Reports.
  -8.70000541213e-08 from Wheat grains, heavy metals uptake model
  -1.98333062727e-07 from Wheat straw, heavy metals uptake model
  Heavy metal uptake can be excluded by setting the parameter heavyMetalUptakeSwitch to zero.
- Chromium III [soil, agricultural]: 7.65703e-6 kg; = 8.52519348379e-06 + ( - 1.74000108243e-07 - 6.94165719543e-07)*heavyMetalUptakeSwitch; source Freiermuth R.  2006
  Comment on mathematicalRelation:
  8.52519348379e-06 from Calculated value - Freiermuth (2006). See 'WFLDB-Guidelines.pdf', available at https://ecoquery.ecoinvent.org/File/Reports.
  -1.74000108243e-07 from Wheat grains, heavy metals uptake model
  -6.94165719543e-07 from Wheat straw, heavy metals uptake model
  Heavy metal uptake can be excluded by setting the parameter heavyMetalUptakeSwitch to zero.
- Copper ion [soil, agricultural]: -4.01017e-6 kg; = 1.33999025816e-06 + ( - 2.871001786e-06 - 2.47916328408e-06)*heavyMetalUptakeSwitch; source Freiermuth R.  2006
  Comment on mathematicalRelation:
  1.33999025816e-06 from Calculated value - Freiermuth (2006). See 'WFLDB-Guidelines.pdf', available at https://ecoquery.ecoinvent.org/File/Reports.
  -2.871001786e-06 from Wheat grains, heavy metals uptake model
  -2.47916328408e-06 from Wheat straw, heavy metals uptake model
  Heavy metal uptake can be excluded by setting the parameter heavyMetalUptakeSwitch to zero.
- Glyphosate [soil, agricultural]: 0.000783657 kg; lognormal variance with pedigree 0.0447216, pedigree (2,2,4,1,1)
  (same comment as for 2,4-D)
- Lead II [soil, agricultural]: 6.07469e-7 kg; = 1.37646804135e-06 + ( - 1.74000108243e-07 - 5.9499918818e-07)*heavyMetalUptakeSwitch; source Freiermuth R.  2006
  Comment on mathematicalRelation:
  1.37646804135e-06 from Calculated value - Freiermuth (2006). See 'WFLDB-Guidelines.pdf', available at https://ecoquery.ecoinvent.org/File/Reports.
  -1.74000108243e-07 from Wheat grains, heavy metals uptake model
  -5.9499918818e-07 from Wheat straw, heavy metals uptake model
  Heavy metal uptake can be excluded by setting the parameter heavyMetalUptakeSwitch to zero.
- MCPA [soil, agricultural]: 0.000191136 kg; lognormal variance with pedigree 0.0447216, pedigree (2,2,4,1,1)
  (same comment as for 2,4-D)
- Mercury II [soil, agricultural]: 1.90253e-8 kg; = 2.77252800779e-08 + ( - 8.70000541213e-09)*heavyMetalUptakeSwitch; source Freiermuth R.  2006
  Comment on mathematicalRelation:
  2.77252800779e-08 from Calculated value - Freiermuth (2006). See 'WFLDB-Guidelines.pdf', available at https://ecoquery.ecoinvent.org/File/Reports.
  -8.70000541213e-09 from Wheat grains, heavy metals uptake model
  Heavy metal uptake can be excluded by setting the parameter heavyMetalUptakeSwitch to zero.
- Nickel II [soil, agricultural]: 1.51021e-6 kg; = 2.27921199329e-06 + ( - 1.74000108243e-07 - 5.9499918818e-07)*heavyMetalUptakeSwitch; source Freiermuth R.  2006
  Comment on mathematicalRelation:
  2.27921199329e-06 from Calculated value - Freiermuth (2006). See 'WFLDB-Guidelines.pdf', available at https://ecoquery.ecoinvent.org/File/Reports.
  -1.74000108243e-07 from Wheat grains, heavy metals uptake model
  -5.9499918818e-07 from Wheat straw, heavy metals uptake model
  Heavy metal uptake can be excluded by setting the parameter heavyMetalUptakeSwitch to zero.
- Tebuconazole [soil, agricultural]: 1.91136e-6 kg; lognormal variance with pedigree 0.0447216, pedigree (2,2,4,1,1)
  (same comment as for 2,4-D)
- Triclopyr [soil, agricultural]: 3.82272e-5 kg; lognormal variance with pedigree 0.0447216, pedigree (2,2,4,1,1)
  (same comment as for 2,4-D)
- Zinc II [soil, agricultural]: -8.49236e-6 kg; = 1.93846403637e-05 + ( - 1.83570114196e-05 - 9.51998701088e-06)*heavyMetalUptakeSwitch; source Freiermuth R.  2006
  Comment on mathematicalRelation:
  1.93846403637e-05 from Calculated value - Freiermuth (2006). See 'WFLDB-Guidelines.pdf', available at https://ecoquery.ecoinvent.org/File/Reports.
  -1.83570114196e-05 from Wheat grains, heavy metals uptake model
  -9.51998701088e-06 from Wheat straw, heavy metals uptake model
  Heavy metal uptake can be excluded by setting the parameter heavyMetalUptakeSwitch to zero.
- Cadmium II [water, ground-]: 2.20507e-8 kg; source Freiermuth R.  2006; lognormal variance with pedigree 0.356938, pedigree (2,2,4,1,1)
  Calculated value - Freiermuth (2006). See 'WFLDB-Guidelines.pdf', available at https://ecoquery.ecoinvent.org/File/Reports.
- Cadmium II [water, surface water]: 1.82443e-8 kg; source Freiermuth R.  2006; lognormal variance with pedigree 0.356938, pedigree (2,2,4,1,1)
  (same comment as for Cadmium II)
- Chromium III [water, ground-]: 1.0519e-5 kg; source Freiermuth R.  2006; lognormal variance with pedigree 0.356938, pedigree (2,2,4,1,1)
  (same comment as for Cadmium II)
- Chromium III [water, surface water]: 2.06208e-6 kg; source Freiermuth R.  2006; lognormal variance with pedigree 0.356938, pedigree (2,2,4,1,1)
  (same comment as for Cadmium II)
- Copper ion [water, ground-]: 1.49808e-6 kg; source Freiermuth R.  2006; lognormal variance with pedigree 0.356938, pedigree (2,2,4,1,1)
  (same comment as for Cadmium II)
- Copper ion [water, surface water]: 1.44277e-6 kg; source Freiermuth R.  2006; lognormal variance with pedigree 0.356938, pedigree (2,2,4,1,1)
  (same comment as for Cadmium II)
- Lead II [water, ground-]: 4.63414e-8 kg; source Freiermuth R.  2006; lognormal variance with pedigree 0.356938, pedigree (2,2,4,1,1)
  (same comment as for Cadmium II)
- Lead II [water, surface water]: 2.59371e-7 kg; source Freiermuth R.  2006; lognormal variance with pedigree 0.356938, pedigree (2,2,4,1,1)
  (same comment as for Cadmium II)
- Mercury II [water, ground-]: 1.64529e-9 kg; source Freiermuth R.  2006; lognormal variance with pedigree 0.356938, pedigree (2,2,4,1,1)
  (same comment as for Cadmium II)
- Mercury II [water, surface water]: 3.66553e-9 kg; source Freiermuth R.  2006; lognormal variance with pedigree 0.356938, pedigree (2,2,4,1,1)
  (same comment as for Cadmium II)
- Nickel II [water, ground-]: 5.81859e-10 kg; source Freiermuth R.  2006; lognormal variance with pedigree 0.356938, pedigree (2,2,4,1,1)
  (same comment as for Cadmium II)
- Nickel II [water, surface water]: 1.15322e-6 kg; source Freiermuth R.  2006; lognormal variance with pedigree 0.356938, pedigree (2,2,4,1,1)
  (same comment as for Cadmium II)
- Nitrate [water, ground-]: 0.0607724 kg; source Faist Emmenegger M. 2009; lognormal variance with pedigree 0.175866, pedigree (2,2,4,1,1)
- Phosphate [water, ground-]: 0.000116415 kg; source Prasuhn V.  2006; lognormal variance with pedigree 0.175866, pedigree (2,2,4,1,1)
  Calculated value - Prasuhn (2006). See 'WFLDB-Guidelines.pdf', available at https://ecoquery.ecoinvent.org/File/Reports.
- Phosphate [water, surface water]: 0.000325967 kg; source Prasuhn V.  2006; lognormal variance with pedigree 0.175866, pedigree (2,2,4,1,1)
  (same comment as for Phosphate)
- Phosphorus [water, surface water]: 7.29447e-5 kg; source Prasuhn V.  2006; lognormal variance with pedigree 0.175866, pedigree (2,2,4,1,1)
  Calculated value - Prasuhn (2006) and SQCB-Erosion. See 'WFLDB-Guidelines.pdf', available at https://ecoquery.ecoinvent.org/File/Reports.
- Zinc II [water, ground-]: 6.37441e-6 kg; source Freiermuth R.  2006; lognormal variance with pedigree 0.356938, pedigree (2,2,4,1,1)
  (same comment as for Cadmium II)
- Zinc II [water, surface water]: 1.73773e-6 kg; source Freiermuth R.  2006; lognormal variance with pedigree 0.356938, pedigree (2,2,4,1,1)
  (same comment as for Cadmium II)

## Sampling procedure
WFLDB Methodological Guidelines for the Life Cycle Inventory of Agricultural Products in the latest version, available at: (Report section: https://v30.ecoquery.ecoinvent.org/File/Reports). Data sources: Data were categorised from level 0 (L0) to level (L4) as follows: L0 = estimate, proxy; L1 = statistical data (e.g. FAOSTAT); L2 = L1 adapted to crop and country; L3 = literature data or L1 resp. L2 data approved by experts; medium detailing (i.e. kg of total N-fertiliser); L4 = L3 data of high detailing (i.e. portion N-fertiliser types).In this dataset data were obtained for yield: L3; Fertilisers: L4; Pesticides: L4; Machinery: L4; Irrigation: L3. For information regarding the calculation of individual exchanges see supporting documentation WFLDB-Documentation.pdf.

## Extrapolations
If used, extrapolations are documented on the flow level.

## Review by Assumpció ANTON 2016-05-30
Be aware that the use of statistics in input calculations could provide some specific inputs not common for specific crops, this should be corrected if better information is available and better reflexed in DQR . Currently, I would dissent for some of good marks provided, being a revision of criteria applied advisable.

Pesticides will need to be amended periodically checking for update of pesticides' ban.
