# treatment of used liquid crystal display, manual dismantling

Dataset: EcoSpold 2, unit process
Geography: CH
Time period: 2005-01-01 to 2022-12-31
Technology level: current
Classification: EcoSpold01Categories: waste management/recycling
Classification: ISIC rev.4 ecoinvent: 3830:Materials recovery
Tags: Treatment; ConvertedDataset
Scenario: Business-as-Usual
System model: Substitution, consequential, long-term
Share of production covered: 100 %
Generated by: Roland Hischier
Published in: Hischier R. 2007
Database: ecoinvent
isCopyrightProtected: true

## General comment
manual dismantling in various fractions based on common transfer coefficients for this type of treatment. Data from own experiences in Switzerland.
[This dataset was already contained in the ecoinvent database version 2. It was not individually updated during the transfer to ecoinvent version 3. Life Cycle Impact Assessment results may still have changed, as they are affected by changes in the supply chain, i.e. in other datasets. This dataset was generated following the ecoinvent quality guidelines for version 2. It may have been subject to central changes described in the ecoinvent version 3 change report (http://www.ecoinvent.org/database/ecoinvent-version-3/reports-of-changes/), and the results of the central updates were reviewed extensively. The changes added e.g. consistent water flows and other information throughout the database. The documentation of this dataset can be found in the ecoinvent reports of version 2, which are still available via the ecoinvent website. The change report linked above covers all central changes that were made during the conversion process.]

## Included activities end
This dataset represents the manual dismantling of a WEEE devices in Switzerland.

## Geography
data of situation in Switzerland

## Technology
current manual dismantling activities in Switzerland.

## Reference product
- used liquid crystal display: -1 kg; name RP_amount_1; By-product classification Waste; CPC 39990: Other wastes n.e.c.
  EcoSpold01Location=CH
  production volume 0.23 kg
    Unknown
    proportion; source: Hischier 2005; value to be replaced by value to be calculated from the demand for this treatment activity
  property carbon content, fossil 0.307481
    Composition data from LCD screen, divided by its weight, 5.14 kg (Tab 4.12, ecoinvent v2.2 report 18_V)
  property carbon content, non-fossil 7.44321e-5
    (same comment as for used liquid crystal display)
  property price 0 EUR2005
    Waste products are assigned a price of zero as they are assumed to require further treatment.
  properties: carbon allocation 0.307556 kg, carbon content 0.307556, dry mass 1 kg, water content 0, water in wet mass 0 kg, wet mass 1 kg

## Inputs from technosphere
- manual treatment facility, waste electric and electronic equipment: 1.6e-8 unit; lognormal variance with pedigree 0.5761, pedigree (4,5,5,3,5)
  EcoSpold01Location=GLO
  Rough estimation of infrastructure
  Uncertainty: rough estimation of infrastructure
- used cable: -0.0126 kg; name BP_amount_1; lognormal variance with pedigree 0.014, pedigree (3,4,1,1,1)
  Calculated - based on composition data
  Uncertainty: calculated - based on composition data
  production volume
    Calculated from production volume of reference product using the relative outputs.
  properties: carbon content, fossil 0.27472, dry mass 1 kg, wet mass 1 kg
  note on carbon content, fossil: According to the European company, 1 kg cable is split up into 0.66 kg of copper and 0.34 kg of plastics (ecoinvent v2.2 report 18_V, pg 97). Plastic C content (0.808) was calculated using data in Tab A.2, ecoinvent v2.2 report 13_I.
- used fluorescent lamp: -0.0111 kg; lognormal variance with pedigree 0.014, pedigree (3,4,1,1,1)
  EcoSpold01Location=GLO
  Calculated - based on composition data
  Uncertainty: calculated - based on composition data
  production volume
    Calculated from the production volume of used liquid crystal display in proportion to the respective output amounts.
  properties: carbon content, fossil 0.554974, dry mass 1 kg, wet mass 1 kg
  note on carbon content, fossil: CCFL backlight lamps is used as a specific example of fluorescent lamps (ecoinvent v2.2 report 18_V)
- used liquid crystal display module: -0.4415 kg; lognormal variance with pedigree 0.014, pedigree (3,4,1,1,1)
  Calculated - based on composition data
  EcoSpold01Location=CH
  Uncertainty: calculated - based on composition data
  production volume
    (same comment as for used fluorescent lamp)
  properties: carbon content, fossil 0.327872, carbon content, non-fossil 4.20542e-5, dry mass 1 kg, wet mass 1 kg
- used printed wiring boards: -0.0428 kg; lognormal variance with pedigree 0.014, pedigree (3,4,1,1,1)
  (same comment as for used fluorescent lamp)
  production volume
    (same comment as for used fluorescent lamp)
  properties: carbon content, fossil 0.193742, carbon content, non-fossil 0.000960142, dry mass 1 kg, wet mass 1 kg
  note on carbon content, fossil: Composition of printed wiring boards used to calculate C content
- waste plastic, consumer electronics: -0.3769 kg; lognormal variance with pedigree 0.014, pedigree (3,4,1,1,1)
  EcoSpold01Location=CH
  Calculated - based on composition data
  Uncertainty: calculated - based on composition data
  production volume
    (same comment as for used fluorescent lamp)
  properties: carbon content, fossil 0.830215, dry mass 0.847 kg, heating value, net 34.78 MJ, water content 0.180638, wet mass 1 kg
  note on carbon content, fossil: C content in 1 kg DM was calculated using data in Tab A.2, ecoinvent v2.2 report 13_I
  note on heating value, net: Assumed equal to "waste plastic, consumer electronics, sorted".

## Sampling procedure
own experiences

## Review by Jürgen Sutter 2007-08-31
passed.
