# treatment of refinery sludge, hazardous waste incineration, with energy recovery

Dataset: EcoSpold 2, unit process
Geography: Europe without Switzerland
Time period: 1997-01-01 to 2022-12-31
Technology level: current
Classification: ISIC rev.4 ecoinvent: 3822:Treatment and disposal of hazardous waste
Tags: Treatment
Scenario: Business-as-Usual
System model: Substitution, consequential, long-term
Generated by: [System]
Database: ecoinvent
isCopyrightProtected: true

## General comment
Inventoried waste contains 100% refinery sludge; . waste composition (wet, in ppm): upper heating value 4.732 MJ/kg; lower heating value 2.453 MJ/kg; H2O 888000; O 1017.1; H 13731; C 86452; S 508.54; N 1017.1; P 478.03; B n.a.; Cl n.a.; Br n.a.; F n.a.; I n.a.; Ag n.a.; As n.a.; Ba n.a.; Cd 10.171; Co 20.342; Cr n.a.; Cu 101.71; Hg 2.0342; Mn n.a.; Mo n.a.; Ni 152.56; Pb 457.69; Sb n.a.; Se n.a.; Sn n.a.; V n.a.; Zn 1017.1; Be n.a.; Sc n.a.; Sr n.a.; Ti n.a.; Tl n.a.; W n.a.; Si n.a.; Fe n.a.; Ca 7000; Al n.a.; K n.a.; Mg n.a.; Na n.a.; Share of carbon in waste that is biogenic 0%. Net energy produced in HWI: 17.11MJ/kg thermal energy and 1.27MJ/kg electric energy. Allocation of energy production: no substitution or expansion. 100% of burden allocated to waste disposal function of HWI. One kg of this waste produces 0.01394 kg of residues, which are landfilled. Additional solidification with 0.005575 kg of cement.

## Included activities end
waste-specific air and water emissions from incineration, auxiliary material consumption for flue gas cleaning. Short-term emissions to river water and long-term emissions to ground water from residual material landfill (from solidified fly ashes and scrubber slugde). Process energy demands for HWI.

## Geography
Specific to the technology encountered in Switzerland in 2000. Well applicable to modern incineration practices in Europe or North America or Japan.

## Technology
Swiss HWI plant in 2000 with wet flue gas scrubber and low-dust SCR DeNOx facility. Gross thermal efficiency 74.4% and gross electric efficiency 10%.

## Time period
Transfer coefficients for modern Swiss MSWI. Emission speciation based on early 90ies data.

## Parameters
- fraction, process water, to air: 1 dimensionless; lognormal variance with pedigree 0.092025, pedigree (4,4,3,2,4)

## Reference product
- refinery sludge: -1 kg; name RP; By-product classification Waste; CPC 39920: Sewage sludge
  production volume 1.0296e9 kg
    Calculated based on literature (European Comission, Join Research Centre, 2015, Best Available Techniques (BAT) Reference Document for the Refining of Mineral Oil and Gas). Based on a survey of 89 refineries the amount of sludge produced per one European refinery is 11'000 tonnes/year. There are 119 refinery plants operating in Europe (EU27, Norway, Switzerland, Turkey, Croatia) excluding Switzerland (2) there are 117 refineries in Europe without Switzerland. The resulting amount of refinery sludge produced in Europe without Switzerland is (11000*1000*117=) 1.29E+9 kg of refinery sludge/year. The share between the End-of-Life technologies are estimated as follows; 80% hazardous waste incineration 10% landfarming 10% sanitary landfill
  property carbon content, fossil 0.767857
    Tab A.6, ecoinvent v2.2 report 13_I. C content has been calculated after data in the tables, and then referred to 1 kg DM
  property heating value, net 2.45 MJ
    Value taken from the general comment of the treatment dataset.
  property price 0 EUR2005
    Waste products are assigned a price of zero as they are assumed to require further treatment.
  properties: carbon allocation 0.080625 kg, carbon content 0.767857, carbon content, non-fossil 0, dry mass 0.105 kg, water content 8.52381, water in wet mass 0.895 kg, wet mass 1 kg

## Inputs from technosphere
- ammonia, anhydrous, liquid: 3.7092e-5 kg; lognormal variance with pedigree 1.182, pedigree (1,1,5,5,1)
  uncertainty calculated from uncertainty in average DeNOx input, uncertainty in the share of thermal NOx, uncertainty of nitrogen content in average municipal waste and the unertainty in nitrogen content in *this* waste.
  properties: dry mass 1 kg, wet mass 1 kg
- calcium chloride: 0.0016576 kg; lognormal variance with pedigree 0.832, pedigree (1,1,5,5,1)
  uncertainty calculated from uncertainty in average auxiliary material input, and the unertainty of the waste composition of this waste
  properties: dry mass 1 kg, wet mass 1 kg
- cement, unspecified: 0.0055749 kg; lognormal variance with pedigree 0.242, pedigree (1,1,5,5,1)
  Cement for solidification of landfilled residual material. Uncertainty calculated from unertainty of the waste composition of this waste, of transfer coefficients in the incinerator and of the solidification recipe.
  properties: dry mass 1 kg, wet mass 1 kg
- chemical, inorganic: 3.423e-5 kg; lognormal variance with pedigree 0.292, pedigree (1,1,5,5,1)
  Proxy for Polyelectrolyte. uncertainty calculated from uncertainty in average auxiliary material input, and the unertainty of the waste composition of this waste
  properties: carbon content, fossil 0.003, dry mass 1 kg, wet mass 1 kg
  note on carbon content, fossil: This dataset is an unweighted average of 20 inorganic substances (listed in Tab 88.1, ecoinvent v2.2 report 8, part II), being part of the top100 chemicals included in this database. The C-content has also been calculated as an unweighted average of the C content of the substances composing this dataset.
- chemical, organic: 7.1663e-5 kg; lognormal variance with pedigree 1.212, pedigree (1,1,5,5,1)
  Proxy for TMT15. uncertainty calculated from uncertainty in average auxiliary material input, and the unertainty of the waste composition of this waste
  properties: carbon content, fossil 0.628, dry mass 1 kg, heating value, net 19.03 MJ, wet mass 1 kg
  note on carbon content, fossil: This dataset is an unweighted average of 20 organic substances (listed in Tab 88.1, ecoinvent v2.2 report 8, part II), being part of the top100 chemicals included in this database. The C-content has also been calculated as an unweighted average of the C content of the substances composing this dataset.
- chromium: 2.9725e-8 kg; lognormal variance with pedigree 1.562, pedigree (1,1,5,5,1)
  Proxy for vanadium pentoxide V2O5 in SCR catalyst. uncertainty calculated from uncertainty in average DeNOx input, uncertainty in the share of thermal NOx, uncertainty of nitrogen content in average municipal waste and the unertainty in nitrogen content in *this* waste.
  properties: dry mass 1 kg, wet mass 1 kg
- electricity, medium voltage: -0.352778 kWh; name BP3; lognormal variance with pedigree 0.122, pedigree (1,1,1,5,1)
  production volume
    Calculated based on the production volume of the reference product.
  properties: price 0.1 EUR2005
- hazardous waste incineration facility: 1.25e-9 unit; lognormal variance with pedigree 0.042, pedigree (1,1,5,5,1)
  demands per kilogram waste. uncertainty is heeded in the module
- heat, central or small-scale, other than natural gas: 19.3142 MJ; lognormal variance with pedigree 0.092, pedigree (1,1,5,5,1)
  Uncertainty dependent on total energy required and heating value present, using experimental GSd for substraction from uc=A*GSDa^2-B
  properties: heating value, net 1 MJ
- heat, district or industrial, natural gas: 0.0181062 MJ; lognormal variance with pedigree 1.282, pedigree (1,1,5,5,1)
  (same comment as for ammonia, anhydrous, liquid)
  properties: heating value, net 1 MJ
- heat, district or industrial, other than natural gas: -17.11 MJ; name BP2; lognormal variance with pedigree 0.122, pedigree (1,1,1,5,1)
  production volume
    Calculated based on the production volume of the reference product.
  property corresponding fuel use, propane, furnace >100kW 0 MJ; name fuel_use
  properties: heating value, net 1 MJ, price 0.0106 EUR2005
  note on corresponding fuel use, propane, furnace >100kW: Lower heating value of the fuel input related to the heat/electricity output, taken directly from ecoinvent v3.0 dataset "heat production, natural gas, at industrial furnace >100kW, GLO 2000".
- hydrochloric acid, without water, in 30% solution state: 2.0538e-5 kg; lognormal variance with pedigree 0.292, pedigree (1,1,5,5,1)
  (same comment as for calcium chloride)
  properties: dry mass 1 kg, heating value, net 3.32 MJ, wet mass 1 kg
- hydrogen peroxide, without water, in 50% solution state: 2.2871e-6 kg; lognormal variance with pedigree 0.792, pedigree (1,1,5,5,1)
  (same comment as for calcium chloride)
  properties: dry mass 1 kg, heating value, net 7.13 MJ, wet mass 1 kg
- iron (III) chloride, without water, in 40% solution state: 0.0010207 kg; lognormal variance with pedigree 0.412, pedigree (1,1,5,5,1)
  (same comment as for calcium chloride)
  properties: dry mass 1 kg, wet mass 1 kg
- process-specific burdens, hazardous waste incineration plant: 1 kg; lognormal variance with pedigree 0.042, pedigree (1,1,5,5,1)
  demands per kilogram waste. uncertainty is heeded in the module
- process-specific burdens, residual material landfill: 0.013937 kg; lognormal variance with pedigree 0.232, pedigree (1,1,5,5,1)
  uncertainty is calculated from uncertainties in waste composition and transfer coefficients in incinerator;activityLink introduced to establish a direct link to the corresponding regional supply of this product
- quicklime, milled, packed: 0.00033708 kg; lognormal variance with pedigree 0.552, pedigree (1,1,5,5,1)
  (same comment as for calcium chloride)
  properties: dry mass 0.99 kg, water content 0.010101, wet mass 1 kg
- residual material landfill: 2.9036e-11 unit; lognormal variance with pedigree 0.232, pedigree (1,1,5,5,1)
  uncertainty is calculated from uncertainties in waste composition and transfer coefficients in incinerator
- sodium hydroxide, without water, in 50% solution state: 0.0024646 kg; lognormal variance with pedigree 0.492, pedigree (1,1,5,5,1)
  (same comment as for calcium chloride)
  properties: dry mass 1 kg, heating value, net 3.03 MJ, wet mass 1 kg
- titanium dioxide: 1.4565e-6 kg; lognormal variance with pedigree 1.562, pedigree (1,1,5,5,1)
  (same comment as for ammonia, anhydrous, liquid)
  properties: dry mass 1 kg, wet mass 1 kg
- waste cement, hydrated: -0.013937 kg; name BP1; lognormal variance with pedigree 0.202, pedigree (1,1,1,5,1)
  Hydrated cement for solidification of landfilled residual material. Uncertainty calculated from unertainty of the waste composition of this waste and transfer coefficients in the incinerator and of the solidification recipe.
  production volume
    Calculated from the production volume of refinery sludge, 89.5% water in proportion to the respective output amounts.
  properties: dry mass 1 kg, wet mass 1 kg

## Emissions to nature
- Ammonia [air, urban air close to ground]: 1.0059e-6 kg; lognormal variance with pedigree 1.222, pedigree (1,1,5,5,1)
  uncertainty calculated from uncertainty in average N-emissions, uncertainty in the share of thermal NOx, uncertainty of nitrogen content in average municipal waste and the unertainty in nitrogen content in *this* waste.
- Cadmium II [air, urban air close to ground]: 5.6009e-10 kg; lognormal variance with pedigree 1.342, pedigree (1,1,5,5,1)
  (same comment as for residual material landfill)
- Calcium [air, urban air close to ground]: 1.1669e-5 kg; lognormal variance with pedigree 0.472, pedigree (1,1,5,5,1)
  (same comment as for residual material landfill)
- Carbon dioxide, fossil [air, urban air close to ground]: 0.31347 kg; lognormal variance with pedigree 0.172, pedigree (1,1,5,5,1)
  calculated from uncertainty in carbon in waste and transfer coefficients
- Carbon monoxide, fossil [air, urban air close to ground]: 1.2076e-5 kg; lognormal variance with pedigree 0.712, pedigree (1,4,5,5,3)
  1 plant for waste solvent incineration in Switzerland
- Cobalt II [air, urban air close to ground]: 1.4239e-8 kg; lognormal variance with pedigree 1.242, pedigree (1,1,5,5,1)
  (same comment as for residual material landfill)
- Copper ion [air, urban air close to ground]: 7.1196e-8 kg; lognormal variance with pedigree 1.022, pedigree (1,1,5,5,1)
  (same comment as for residual material landfill)
- Cyanide [air, urban air close to ground]: 9.0531e-7 kg; lognormal variance with pedigree 1.31, pedigree (5,5,5,5,5)
  uncertainty calculated from uncertainty for proxy (from MSWI), uncertainty in average N-emissions, uncertainty in the share of thermal NOx, uncertainty of nitrogen content in average municipal waste and the unertainty in nitrogen content in *this* waste.
- Dinitrogen monoxide [air, urban air close to ground]: 3.6212e-6 kg; lognormal variance with pedigree 1.31, pedigree (5,5,5,5,5)
  (same comment as for Cyanide)
- Lead II [air, urban air close to ground]: 1.6989e-8 kg; lognormal variance with pedigree 0.842, pedigree (1,1,5,5,1)
  (same comment as for residual material landfill)
- Mercury II [air, urban air close to ground]: 7.0255e-14 kg; lognormal variance with pedigree 1.622, pedigree (1,1,5,5,1)
  (same comment as for residual material landfill)
- Nickel II [air, urban air close to ground]: 1.0679e-7 kg; lognormal variance with pedigree 0.972, pedigree (1,1,5,5,1)
  (same comment as for residual material landfill)
- Nitrogen oxides [air, urban air close to ground]: 2.6153e-5 kg; lognormal variance with pedigree 1.222, pedigree (1,1,5,5,1)
  (same comment as for Ammonia)
- Phosphorus [air, urban air close to ground]: 3.3462e-7 kg; lognormal variance with pedigree 0.822, pedigree (1,1,5,5,1)
  (same comment as for residual material landfill)
- Sulfur dioxide [air, urban air close to ground]: 6.1025e-7 kg; lognormal variance with pedigree 0.812, pedigree (1,1,5,5,1)
  (same comment as for residual material landfill)
- Water [air, unspecified]: 0.000895 m3; name water_to_air_unspecified; lognormal variance with pedigree 0.0827, pedigree (2,2,5,5,1)
  Calculated value based on water balance.
  property carbon content, fossil 0; name C_content_fossil
  property carbon content, non-fossil 0; name C_content_non_fossil
  property fraction, origin: fresh water 0; name fraction_origin_fresh_water
  property fraction, origin: salt water 0; name fraction_origin_salt_water
  property fraction, origin: unspecified 1; name fraction_origin_unspecified
  property water in wet mass 1000 kg; name WWM
- Zinc II [air, urban air close to ground]: 7.1196e-7 kg; lognormal variance with pedigree 0.722, pedigree (1,1,5,5,1)
  (same comment as for residual material landfill)
- BOD5, Biological Oxygen Demand [water, ground-, long-term]: 0.0014046 kg; lognormal variance with pedigree 0.232, pedigree (1,1,5,5,1)
  Long-term emissions from landfilling of incineration residues. uncertainty is calculated from uncertainties in waste composition and transfer coefficients in incinerator and landfills.
- BOD5, Biological Oxygen Demand [water, surface water]: 4.344e-6 kg; lognormal variance with pedigree 0.432, pedigree (1,1,5,5,1)
  uncertainty is calculated from uncertainties in waste composition and transfer coefficients in incinerator and landfills
- COD, Chemical Oxygen Demand [water, ground-, long-term]: 0.0014046 kg; lognormal variance with pedigree 0.232, pedigree (1,1,5,5,1)
  (same comment as for BOD5, Biological Oxygen Demand)
- COD, Chemical Oxygen Demand [water, surface water]: 4.344e-6 kg; lognormal variance with pedigree 0.432, pedigree (1,1,5,5,1)
  (same comment as for BOD5, Biological Oxygen Demand)
- Cadmium II [water, ground-, long-term]: 6.9015e-8 kg; lognormal variance with pedigree 7.542, pedigree (1,1,5,5,1)
  (same comment as for BOD5, Biological Oxygen Demand)
- Cadmium II [water, surface water]: 4.5959e-9 kg; lognormal variance with pedigree 1.272, pedigree (1,1,5,5,1)
  (same comment as for BOD5, Biological Oxygen Demand)
- Calcium II [water, ground-, long-term]: 0.00063145 kg; lognormal variance with pedigree 1.892, pedigree (1,1,5,5,1)
  (same comment as for BOD5, Biological Oxygen Demand)
- Calcium II [water, surface water]: 1.0542e-6 kg; lognormal variance with pedigree 1.352, pedigree (1,1,5,5,1)
  (same comment as for BOD5, Biological Oxygen Demand)
- Cobalt II [water, surface water]: 2.0327e-5 kg; lognormal variance with pedigree 1.212, pedigree (1,1,5,5,1)
  (same comment as for BOD5, Biological Oxygen Demand)
- Copper ion [water, ground-, long-term]: 3.7445e-6 kg; lognormal variance with pedigree 3.652, pedigree (1,1,5,5,1)
  (same comment as for BOD5, Biological Oxygen Demand)
- Copper ion [water, surface water]: 4.3695e-6 kg; lognormal variance with pedigree 1.002, pedigree (1,1,5,5,1)
  (same comment as for BOD5, Biological Oxygen Demand)
- DOC, Dissolved Organic Carbon [water, ground-, long-term]: 0.00061451 kg; lognormal variance with pedigree 0.232, pedigree (1,1,5,5,1)
  (same comment as for BOD5, Biological Oxygen Demand)
- DOC, Dissolved Organic Carbon [water, surface water]: 1.9005e-6 kg; lognormal variance with pedigree 0.432, pedigree (1,1,5,5,1)
  (same comment as for BOD5, Biological Oxygen Demand)
- Lead II [water, ground-, long-term]: 2.3739e-6 kg; lognormal variance with pedigree 7.722, pedigree (1,1,5,5,1)
  (same comment as for BOD5, Biological Oxygen Demand)
- Lead II [water, surface water]: 1.2458e-8 kg; lognormal variance with pedigree 1.072, pedigree (1,1,5,5,1)
  (same comment as for BOD5, Biological Oxygen Demand)
- Mercury II [water, ground-, long-term]: 9.5011e-8 kg; lognormal variance with pedigree 3.852, pedigree (1,1,5,5,1)
  (same comment as for BOD5, Biological Oxygen Demand)
- Mercury II [water, surface water]: 2.1448e-8 kg; lognormal variance with pedigree 1.512, pedigree (1,1,5,5,1)
  (same comment as for BOD5, Biological Oxygen Demand)
- Nickel II [water, ground-, long-term]: 4.39e-5 kg; lognormal variance with pedigree 1.202, pedigree (1,1,5,5,1)
  (same comment as for BOD5, Biological Oxygen Demand)
- Nickel II [water, surface water]: 3.1272e-5 kg; lognormal variance with pedigree 0.942, pedigree (1,1,5,5,1)
  (same comment as for BOD5, Biological Oxygen Demand)
- Nitrate [water, ground-, long-term]: 3.6537e-5 kg; lognormal variance with pedigree 0.712, pedigree (1,1,5,5,1)
  (same comment as for BOD5, Biological Oxygen Demand)
- Nitrate [water, surface water]: 1.301e-5 kg; lognormal variance with pedigree 0.502, pedigree (1,1,5,5,1)
  (same comment as for BOD5, Biological Oxygen Demand)
- Phosphate [water, ground-, long-term]: 0.00032222 kg; lognormal variance with pedigree 1.362, pedigree (1,1,5,5,1)
  (same comment as for BOD5, Biological Oxygen Demand)
- Phosphate [water, surface water]: 2.2951e-5 kg; lognormal variance with pedigree 0.772, pedigree (1,1,5,5,1)
  (same comment as for BOD5, Biological Oxygen Demand)
- Sulfate [water, ground-, long-term]: 5.8291e-5 kg; lognormal variance with pedigree 0.792, pedigree (1,1,5,5,1)
  (same comment as for BOD5, Biological Oxygen Demand)
- Sulfate [water, surface water]: 0.0014664 kg; lognormal variance with pedigree 0.782, pedigree (1,1,5,5,1)
  (same comment as for BOD5, Biological Oxygen Demand)
- TOC, Total Organic Carbon [water, ground-, long-term]: 0.00061451 kg; lognormal variance with pedigree 0.232, pedigree (1,1,5,5,1)
  (same comment as for BOD5, Biological Oxygen Demand)
- TOC, Total Organic Carbon [water, surface water]: 1.9005e-6 kg; lognormal variance with pedigree 0.432, pedigree (1,1,5,5,1)
  (same comment as for BOD5, Biological Oxygen Demand)
- Zinc II [water, ground-, long-term]: 1.229e-5 kg; lognormal variance with pedigree 5.542, pedigree (1,1,5,5,1)
  (same comment as for BOD5, Biological Oxygen Demand)
- Zinc II [water, surface water]: 1.3649e-5 kg; lognormal variance with pedigree 0.702, pedigree (1,1,5,5,1)
  (same comment as for BOD5, Biological Oxygen Demand)

## Sampling procedure
The 2 Swiss HWI plants, used as the inventory reference technology mix, have a total annual capacity of 53'000 tons of hazardous waste. This corresponds to 39% of the Swiss total installed capacity in 2000. Swiss average plants size is 20'000 t/a.

## Extrapolations
Extrapolated from Swiss data. Available waste composition data. Transfer coefficients from one modern HWI completed with data from MSWI. Waste-specific auxiliary material consumption adapted from MSWI. This dataset has been copied from an original dataset covering the geography CH. The uncertainty has been adjusted accordingly.
