# treatment of waste plastic, consumer electronics, sanitary landfill, wet infiltration class (500mm)

Dataset: EcoSpold 2, unit process
Geography: GLO
Time period: 2006-01-01 to 2022-12-31
Technology level: current
Classification: ISIC rev.4 ecoinvent: 3821:Treatment and disposal of non-hazardous waste
Synonyms: municipal waste landfill
Scenario: Business-as-Usual
System model: Substitution, consequential, long-term
Share of production covered: 1 %
Generated by: Avraam Symeonidis
Database: ecoinvent
isCopyrightProtected: true

## General comment
This dataset represents the activity of waste disposal of waste plastic, consumer electronics in a sanitary landfill. Recommended use of this dataset: This waste represents the non-recycled reject flow of plastics from electronics recycling. // Waste composition (wet, in ppm): upper heating value 36.29 MJ/kg; lower heating value 34.78 MJ/kg; H2O 11129; O 41000; H 75000; C 821000; S 300; N 13100; P 600; B n.a.; Cl 6300; Br 6800; F 130; I n.a.; Ag n.a.; As 10; Ba 137; Cd 115; Co 29.478; Cr 34; Cu 3194.1; Hg 1.4; Mn 4; Mo 2; Ni 703; Pb 127; Sb 4795.2; Se 1.9596; Sn 267; V 0.5; Zn 361; Be 0.46656; Sc n.a.; Sr 82.582; Ti 4187; Tl 0.37325; W n.a.; Si 3547; Fe 1483; Ca 3177; Al 2020; K 233; Mg n.a.; Na 128; . // Share of carbon in waste that is biogenic 0%. Share of metals in waste not oxidised and bulk-recyclable (exclude very small or thin parts) Iron: 0%; Alu: 0%; Copper: 0%. Overall degradability of waste during 100 years: 1%.

## Included activities start
from final waste deposition (without transports to the site)

## Included activities end
Waste-specific short-term emissions to air via landfill gas and landfill leachate. Waste-specific long-term emissions from landfill.

## Geography
Given name of landfill location is 'infiltration class 4 wet (2018)'. Landfill site with mean annual temperature (MAT) of 8 degC, mean annual precipitation (MAP) of 1100 mm/year, and net infiltration of 500 mm/year.
Climate adjustments result in an alpha t (temperature) for permafrost areas of 0.999. Total climate adjustments with alpha pt of 0.999.

## Technology
This is an inventory for a sanitary (controlled) landfill for municipal solid waste. Ultimate average landfill height is 20 meters. Operation phase duration is 30 years.Percentage of landfill gas directly emitted is 47w%. Percentage of landfill gas captured and flared is 18.02w%. Percentage of landfill gas captured and utilised is 34.98%. Conversion efficiencies are 27.8e% for electricity and 13.5e% for useful heat.
Leachate collected during the first 100 years is treated before emission. Based on average waste composition and climate data the end of carbonate phase is estimated to be reached 4476 years after waste deposition.

## Reference product
- waste plastic, consumer electronics: -1 kg; By-product classification Waste; CPC 39270: Waste, parings and scrap of plastics
  main reference product of this activity (supply of disposal service).
  production volume 4 kg
    placeholder
  property heating value, net 34.78 MJ
    Assumed equal to "waste plastic, consumer electronics, sorted".
  property price 0 EUR2005
    Waste products are assigned a price of zero as they are assumed to require further treatment.
  properties: aluminium content 0.0020427, antimony content 0.0048492, arsenic content 1.0113e-5, barium content 0.00013854, beryllium content 4.7181e-7, bromine content 0.0068765, cadmium content 0.00011629, calcium content 0.0032128, carbon allocation 0.820999 kg, carbon content 0.83024, carbon content, fossil 0.83024, chlorine content 0.0063709, chromium content 3.4383e-5, cobalt content 2.9809e-5, copper content 0.0032301, dry mass 0.98887 kg, fluorine content 0.00013146, heating value, gross 36.287 MJ, hydrogen content 0.075844, iron content 0.0014997, lead content 0.00012843, manganese content 4.045e-6, mercury content 1.4158e-6, molybdenum content 2.0225e-6, nickel content 0.00071091, nitrogen content 0.013247, oxygen content 0.041461, phosphorus content 0.00060675, potassium content 0.00023562, selenium content 1.9816e-6, silicon content 0.0035869, sodium content 0.00012944, strontium content 8.3511e-5, sulfur content 0.00030338, thallium content 3.7745e-7, tin content 0.00027, titanium content 0.0042341, vanadium content 5.0563e-7, water content 0.011254, water in wet mass 0.011129 kg, wet mass 1 kg, zinc content 0.00036506

## Inputs from technosphere
- aluminium sulfate, powder: 7.47226e-8, 3.54717e-7 kg (2 suppliers, which the file names only by identifier); sum of these 4.2944e-7 kg; lognormal variance with pedigree 0.3755, pedigree (1,1,4,1,1)
  burden from wastewater treatment of the short-term leachate (0-100a).
  Uncertainty: U
  properties: dry mass 1 kg, wet mass 1 kg
- ammonia, anhydrous, liquid: 1.15123e-8, 2.34229e-9, 2.23478e-8, 8.60834e-8, 1.04709e-8, 4.94584e-8, 6.93394e-9, 2.47711e-7, 2.281e-8 kg (9 suppliers, which the file names only by identifier); sum of these 4.5967e-7 kg; lognormal variance with pedigree 0.12921, pedigree (1,1,4,1,1)
  burden from incineration of sludge from wastewater treatment of the short-term leachate (0-100a).
  Uncertainty: u
  properties: dry mass 1 kg, wet mass 1 kg
- cast iron: 1.475e-6 kg; lognormal variance with pedigree 0.088256, pedigree (1,1,4,1,1)
  for sewer auxiliary materials.
  Uncertainty: U
  properties: carbon content, fossil 0.04, dry mass 1 kg, wet mass 1 kg
- cement, unspecified: 1.8058e-6 kg; lognormal variance with pedigree 0.16691, pedigree (1,1,4,1,1)
  (same comment as for ammonia, anhydrous, liquid)
  properties: dry mass 1 kg, wet mass 1 kg
- chemical, inorganic: 1.4832e-9 kg; lognormal variance with pedigree 0.21034, pedigree (1,1,4,1,1)
  (same comment as for ammonia, anhydrous, liquid)
  properties: carbon content, fossil 0.003, dry mass 1 kg, wet mass 1 kg
- chemical, organic: 3.1106e-7 kg; lognormal variance with pedigree 0.39157, pedigree (1,1,4,1,1)
  (same comment as for ammonia, anhydrous, liquid)
  properties: carbon content, fossil 0.628, dry mass 1 kg, heating value, net 19.03 MJ, wet mass 1 kg
- chromium oxide, flakes: 2.6853e-10 kg; lognormal variance with pedigree 0.18946, pedigree (1,1,4,1,1)
  burden from incineration of sludge from wastewater treatment of the short-term leachate (0-100a). Proxy for vanadium pentoxide V2O5 in SCR catalyst,
  Uncertainty: u
  properties: dry mass 1 kg, wet mass 1 kg
- concrete, normal strength: 1.429e-7 m3; lognormal variance with pedigree 0.088256, pedigree (1,1,4,1,1)
  for leachate collection tanks and sewer pipe.
  Uncertainty: U
  properties: dry mass 2190 kg, water content 0.086758, wet mass 2380 kg
- diesel, burned in building machine: 0.048387 MJ; lognormal variance with pedigree 0.088256, pedigree (1,1,4,1,1)
  for waste distribution and compaction, construction diesel for base and compartment seals, for access street and sewer construction.
  Uncertainty: U
  properties: heating value, net 1 MJ
- electricity, for reuse in municipal waste incineration only: 1.03023e-6, 1.03023e-6, 1.03023e-6, 1.03023e-6, 1.03023e-6, 1.03023e-6, 1.03023e-6, 1.03023e-6, 1.03023e-6, 1.03023e-6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 kWh (26 suppliers, which the file names only by identifier); sum of these 2.6786e-5 kWh; lognormal variance with pedigree 0.208, pedigree (1,1,4,1,1)
  (same comment as for ammonia, anhydrous, liquid)
- electricity, low voltage: 0.0017646 kWh; lognormal variance with pedigree 0.085095, pedigree (1,1,4,1,1)
  burden from wastewater treatment of the short-term leachate (0-100a) and landfill administrative building electricity consumption.
  Uncertainty: U
- electricity, medium voltage: -0.0062206 kWh; lognormal variance with pedigree 0.50509, pedigree (1,1,1,1,1)
  net production of electricity from landfill gas utilisation (minus electricity demand for landfill gas pumping).
  Uncertainty: U
  production volume
    calculated in proportion to reference product waste input to incinerator
  properties: price 0.1 EUR2005
- excavation, hydraulic digger: 0.00038775 m3; lognormal variance with pedigree 0.088256, pedigree (1,1,4,1,1)
  excavation work for landfill construction, sewer construction and recultivation.
  Uncertainty: U
- excavation, skid-steer loader: 0.00038775 m3; lognormal variance with pedigree 0.088256, pedigree (1,1,4,1,1)
  (same comment as for excavation, hydraulic digger)
- extrusion, plastic pipes: 8.4939e-5 kg; lognormal variance with pedigree 0.088256, pedigree (1,1,4,1,1)
  for base and interior drain system of landfill, sewer auxiliary materials.
  Uncertainty: U
- gravel, round: 4.16364e-5, 0.160098 kg (2 suppliers, which the file names only by identifier); sum of these 0.16014 kg; lognormal variance with pedigree 0.088256, pedigree (1,1,4,1,1)
  for base and flank gravel beds and concrete, for access street, for drainage beds, for recultivation layer.
  Uncertainty: U
  properties: dry mass 1 kg, wet mass 1 kg
- heat, district or industrial, natural gas: 0.00013188 MJ; lognormal variance with pedigree 0.12921, pedigree (1,1,4,1,1)
  burden from wastewater treatment of the short-term leachate and incineration of sludge from this wastewater treatment.
  Uncertainty: u
  properties: heating value, net 1 MJ
- heat, district or industrial, other than natural gas: -0.0095442 MJ
  net production of heat from landfill gas utilisation.
  production volume
    calculated in proportion to reference product waste input to incinerator
  properties: dry mass 1.17548 kg, heating value, net 1 MJ, price 0.0124601 EUR2005, wet mass 1.17548 kg
- heat, for reuse in municipal waste incineration only: 6.01e-6, 6.01e-6, 6.01e-6, 6.01e-6, 6.01e-6, 6.01e-6, 6.01e-6, 6.01e-6, 6.01e-6, 6.01e-6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 MJ (26 suppliers, which the file names only by identifier); sum of these 0.00015626 MJ; lognormal variance with pedigree 0.12792, pedigree (1,1,4,1,1)
  (same comment as for ammonia, anhydrous, liquid)
- hydrochloric acid, without water, in 30% solution state: 1.5485e-10, 7.3509e-10 kg (2 suppliers, which the file names only by identifier); sum of these 8.8994e-10 kg; lognormal variance with pedigree 0.21034, pedigree (1,1,4,1,1)
  (same comment as for ammonia, anhydrous, liquid)
  properties: dry mass 1 kg, heating value, net 3.32 MJ, wet mass 1 kg
- iron (III) chloride, without water, in 40% solution state: 2.4314e-6 kg; lognormal variance with pedigree 0.33854, pedigree (1,1,4,1,1)
  (same comment as for ammonia, anhydrous, liquid)
  properties: dry mass 1 kg, wet mass 1 kg
- iron sulfate: 1.06362e-6, 5.25278e-7 kg (2 suppliers, which the file names only by identifier); sum of these 1.5889e-6 kg; lognormal variance with pedigree 0.3755, pedigree (1,1,4,1,1)
  burden from wastewater treatment of the short-term leachate (0-100a).
  Uncertainty: U
  properties: dry mass 1 kg, wet mass 1 kg
- municipal waste incineration facility: 4.6578e-14 unit; lognormal variance with pedigree 0.12782, pedigree (1,1,4,1,1)
  (same comment as for ammonia, anhydrous, liquid)
- pitch: 0.000109754, 1.26899e-5, 6.25509e-6, 9.26113e-6, 0.00160035, 2.39036e-6, 0.000283104, 0.0003637 kg (8 suppliers, which the file names only by identifier); sum of these 0.0023875 kg; lognormal variance with pedigree 0.088256, pedigree (1,1,4,1,1)
  for base and compartment seals and access street construction.
  Uncertainty: U
  properties: carbon content, fossil 0.83, dry mass 1 kg, heating value, net 28 MJ, wet mass 1 kg
- polyethylene, high density, granulate: 0.00026849 kg; lognormal variance with pedigree 0.088256, pedigree (1,1,4,1,1)
  for base and compartment seals, for base and interior drain system of landfill, sewer auxiliary materials.
  Uncertainty: U
  properties: carbon content, fossil 0.857143, dry mass 1 kg, heating value, net 42.47 MJ, wet mass 1 kg
- polypropylene, granulate: 2.2348e-7 kg; lognormal variance with pedigree 0.088256, pedigree (1,1,4,1,1)
  for sewer auxiliary materials.
  Uncertainty: U
  properties: carbon content, fossil 0.857143, dry mass 1 kg, heating value, net 32.78 MJ, wet mass 1 kg
  note on heating value, net: Value extracted from "treatment of waste polypropylene, open burning"
- polyvinylchloride, bulk polymerised: 2.2348e-7 kg; lognormal variance with pedigree 0.088256, pedigree (1,1,4,1,1)
  for sewer auxiliary materials.
  Uncertainty: U
  properties: carbon content, fossil 0.387097, dry mass 1 kg, heating value, net 21.5 MJ, wet mass 1 kg
- process-specific burdens, municipal waste incineration: 5.22587e-5, 0.000132483, 1.56815e-6 kg (3 suppliers, which the file names only by identifier); sum of these 0.00018631 kg; lognormal variance with pedigree 0.12782, pedigree (1,1,4,1,1)
  (same comment as for ammonia, anhydrous, liquid)
- process-specific burdens, residual material landfill: 1.26626e-6, 3.79972e-8, 3.21014e-6 kg (3 suppliers, which the file names only by identifier); sum of these 4.5144e-6 kg; lognormal variance with pedigree 0.16536, pedigree (1,1,4,1,1)
  (same comment as for ammonia, anhydrous, liquid)
- process-specific burdens, slag landfill: 3.34993e-6, 1.00523e-7, 8.49254e-6 kg (3 suppliers, which the file names only by identifier); sum of these 1.1943e-5 kg; lognormal variance with pedigree 0.103734, pedigree (1,1,4,1,1)
  (same comment as for ammonia, anhydrous, liquid)
- quicklime, milled, packed: 3.56691e-11, 4.20213e-9 kg (2 suppliers, which the file names only by identifier); sum of these 4.2378e-9 kg; lognormal variance with pedigree 0.105224, pedigree (1,1,4,1,1)
  (same comment as for ammonia, anhydrous, liquid)
  properties: dry mass 0.99 kg, water content 0.010101, wet mass 1 kg
- reinforcing steel: 8.7158e-6 kg; lognormal variance with pedigree 0.088256, pedigree (1,1,4,1,1)
  for sewer auxiliary materials.
  Uncertainty: U
  properties: carbon content, fossil 0.004, dry mass 1 kg, wet mass 1 kg
- residual material landfill: 9.4051e-15 unit; lognormal variance with pedigree 0.16536, pedigree (1,1,4,1,1)
  (same comment as for ammonia, anhydrous, liquid)
- sand: 1.21144e-8, 5.25273e-9, 1.01179e-6, 6.58368e-5 kg (4 suppliers, which the file names only by identifier); sum of these 6.6866e-5 kg; lognormal variance with pedigree 0.088256, pedigree (1,1,4,1,1)
  for sewer auxiliary materials.
  Uncertainty: U
  properties: dry mass 1 kg, wet mass 1 kg
- sewer grid, 5E9l/year, 110 km: 5.4401e-10 km; lognormal variance with pedigree 0.00859512, pedigree (1,1,4,1,1)
  burden from wastewater treatment of the short-term leachate (0-100a).
  Uncertainty: U
- slag landfill: 2.1232e-14 unit; lognormal variance with pedigree 0.103734, pedigree (1,1,4,1,1)
  (same comment as for ammonia, anhydrous, liquid)
- sodium hydroxide, without water, in 50% solution state: 2.3374e-8 kg; lognormal variance with pedigree 0.10467, pedigree (1,1,4,1,1)
  (same comment as for ammonia, anhydrous, liquid)
  properties: dry mass 1 kg, heating value, net 3.03 MJ, wet mass 1 kg
- steel, chromium steel 18/8, hot rolled: 3.0394e-6 kg; lognormal variance with pedigree 0.088256, pedigree (1,1,4,1,1)
  for sewer auxiliary materials.
  Uncertainty: U
  properties: carbon content, fossil 0.0008, dry mass 1 kg, wet mass 1 kg
- synthetic rubber: 8.9393e-8 kg; lognormal variance with pedigree 0.088256, pedigree (1,1,4,1,1)
  for sewer auxiliary materials.
  Uncertainty: U
  properties: carbon content, fossil 0.871949, dry mass 1 kg, heating value, net 26.42 MJ, wet mass 1 kg
- tap water: 0.0018577 kg; lognormal variance with pedigree 0.088256, pedigree (1,1,4,1,1)
  for sewer auxiliary materials.
  Uncertainty: U
  properties: carbon content, fossil 0.00178991, dry mass 0.000337476 kg, water content 2962.17, wet mass 1 kg
- titanium dioxide: 8.772e-9, 4.386e-9 kg (2 suppliers, which the file names only by identifier); sum of these 1.3158e-8 kg; lognormal variance with pedigree 0.18946, pedigree (1,1,4,1,1)
  (same comment as for ammonia, anhydrous, liquid)
  properties: dry mass 1 kg, wet mass 1 kg
- transport, freight, lorry, unspecified: 6.0846e-6 metric ton*km; lognormal variance with pedigree 0.085913, pedigree (1,1,4,1,1)
  Transport services to transport incineration residues to landfills and filter ash to external treatments (FLUWA).
  Uncertainty: u
- waste cement, hydrated: -1.26626e-6, -3.79972e-8, -3.21014e-6 kg (3 suppliers, which the file names only by identifier); sum of these -4.5144e-6 kg; lognormal variance with pedigree 0.15891, pedigree (1,1,1,1,1)
  (same comment as for electricity, low voltage)
  production volume
    calculated in proportion to reference product waste input to incinerator
  properties: dry mass 1 kg, wet mass 1 kg
- waste graphical paper: -2.58095e-7, -9.32607e-7, -9.0937e-8, -1.69016e-6, -1.68334e-7, -2.25681e-8, -4.15081e-6, -3.13975e-5 kg (8 suppliers, which the file names only by identifier); sum of these -3.8711e-5 kg; lognormal variance with pedigree 0.00088123, pedigree (1,1,1,1,1)
  burden from wastewater treatment of the short-term leachate (0-100a).
  Uncertainty: U
  production volume
    calculated in proportion to reference product waste input to incinerator
  properties: carbon content, non-fossil 0.454955, dry mass 0.888 kg, heating value, net 14.12 MJ, water content 0.126126, wet mass 1 kg
  note on heating value, net: Value taken from the general comment of the treatment dataset.
- waste plastic, mixture: -2.17251e-8, -4.29928e-6, -3.72611e-6, -1.18649e-7, -1.12669e-7, -2.87262e-7, -4.7933e-8, -3.00974e-5 kg (8 suppliers, which the file names only by identifier); sum of these -3.8711e-5 kg; lognormal variance with pedigree 0.00088123, pedigree (1,1,1,1,1)
  burden from wastewater treatment of the short-term leachate (0-100a).
  Uncertainty: U
  production volume
    calculated in proportion to reference product waste input to incinerator
  properties: carbon content, fossil 0.747344, dry mass 0.847 kg, heating value, net 30.79 MJ, water content 0.180638, wet mass 1 kg
- wastewater treatment facility, capacity 5E9l/year: 1.4206e-11 unit; lognormal variance with pedigree 0.00859512, pedigree (1,1,4,1,1)
  burden from wastewater treatment of the short-term leachate (0-100a).
  Uncertainty: U

## Inputs from nature
All rows: lognormal variance with pedigree 0.088256, pedigree (1,1,4,1,1)
- Occupation, construction site [natural resource, land]: 0.00025 m2*year
  for construction phase of the landfill.
  Uncertainty: U
- Occupation, dump site [natural resource, land]: 0.0015 m2*year
  for landfill operation phase.
  Uncertainty: U
- Occupation, shrub land, sclerophyllous [natural resource, land]: 0.00025 m2*year
  restoration and aftercare phase.
  Uncertainty: U
- Occupation, traffic area, road network [natural resource, land]: 0.00185 m2*year
  for access road.
  Uncertainty: U
- Transformation, from dump site, sanitary landfill [natural resource, land]: 5e-5 m2
  conversion after landfill operation.
  Uncertainty: U
- Transformation, from pasture, man made [natural resource, land]: 6e-5 m2
  original conversion of landfill area and access road.
  Uncertainty: U
- Transformation, from shrub land, sclerophyllous [natural resource, land]: 5e-5 m2
  after restoration.
  Uncertainty: U
- Transformation, to dump site, sanitary landfill [natural resource, land]: 5e-5 m2
  conversion to landfill area.
  Uncertainty: U
- Transformation, to forest, unspecified [natural resource, land]: 5e-5 m2
  conversion to forest after renaturation.
  Uncertainty: U
- Transformation, to shrub land, sclerophyllous [natural resource, land]: 5e-5 m2
  initial restoration and renaturation.
  Uncertainty: U
- Transformation, to traffic area, road network [natural resource, land]: 1e-5 m2
  construction of access road.
  Uncertainty: U

## Emissions to nature
- Aluminium III [air, non-urban air or from high stacks]: 2.5214e-10 kg; lognormal variance with pedigree 0.60596, pedigree (1,1,4,1,1)
  burden from direct release or incineration of landfill biogas; or windblown leachate evaporite in arid climates.
  Uncertainty: U
- Aluminium III [air, urban air close to ground]: 1.587e-9 kg; lognormal variance with pedigree 0.31963, pedigree (1,1,4,1,1)
  Emissions from short-term leachate treatment and incineration of resulting sludge.
  Uncertainty: U
- Ammonia [air, urban air close to ground]: 2.9171e-7 kg; lognormal variance with pedigree 0.10937, pedigree (1,1,4,1,1)
  (same comment as for Aluminium III)
- Antimony ion [air, non-urban air or from high stacks]: 1.2627e-9 kg; lognormal variance with pedigree 0.555, pedigree (1,1,4,1,1)
  (same comment as for Aluminium III)
- Antimony ion [air, urban air close to ground]: 2.4876e-10 kg; lognormal variance with pedigree 0.44561, pedigree (1,1,4,1,1)
  (same comment as for Aluminium III)
- Arsenic ion [air, non-urban air or from high stacks]: 2.515e-10 kg; lognormal variance with pedigree 0.60954, pedigree (1,1,4,1,1)
  (same comment as for Aluminium III)
- Arsenic ion [air, urban air close to ground]: 5.0505e-12 kg; lognormal variance with pedigree 0.48, pedigree (1,1,4,1,1)
  (same comment as for Aluminium III)
- Barium II [air, non-urban air or from high stacks]: 3.918e-10 kg; lognormal variance with pedigree 0.59397, pedigree (1,1,4,1,1)
  (same comment as for Aluminium III)
- Barium II [air, urban air close to ground]: 1.4732e-9 kg; lognormal variance with pedigree 0.33545, pedigree (1,1,4,1,1)
  (same comment as for Aluminium III)
- Beryllium II [air, non-urban air or from high stacks]: 6.7732e-14 kg; lognormal variance with pedigree 0.87649, pedigree (1,1,4,1,1)
  (same comment as for Aluminium III)
- Beryllium II [air, urban air close to ground]: 1.3343e-13 kg; lognormal variance with pedigree 0.61546, pedigree (1,1,4,1,1)
  (same comment as for Aluminium III)
- Bromine [air, non-urban air or from high stacks]: 2.3977e-6 kg; lognormal variance with pedigree 0.3088, pedigree (1,1,4,1,1)
  (same comment as for Aluminium III)
- Cadmium II [air, non-urban air or from high stacks]: 1.3474e-9 kg; lognormal variance with pedigree 0.55361, pedigree (1,1,4,1,1)
  (same comment as for Aluminium III)
- Cadmium II [air, urban air close to ground]: 5.5262e-12 kg; lognormal variance with pedigree 0.40328, pedigree (1,1,4,1,1)
  (same comment as for Aluminium III)
- Calcium [air, non-urban air or from high stacks]: 1.033e-9 kg; lognormal variance with pedigree 0.56121, pedigree (1,1,4,1,1)
  (same comment as for Aluminium III)
- Calcium [air, urban air close to ground]: 6.757e-10 kg; lognormal variance with pedigree 0.29839, pedigree (1,1,4,1,1)
  (same comment as for Aluminium III)
- Carbon dioxide, fossil [air, non-urban air or from high stacks]: 0.021511 kg; lognormal variance with pedigree 0.101235, pedigree (1,1,4,1,1)
  burden from direct release or incineration of landfill biogas.
  Uncertainty: U
- Carbon dioxide, fossil [air, urban air close to ground]: 0.00068553 kg; lognormal variance with pedigree 0.21284, pedigree (1,1,4,1,1)
  (same comment as for Aluminium III)
- Carbon monoxide, fossil [air, urban air close to ground]: 4.501e-7 kg; lognormal variance with pedigree 0.22012, pedigree (1,1,4,1,1)
  (same comment as for Aluminium III)
- Carbon monoxide, non-fossil [air, non-urban air or from high stacks]: 1.3124e-6 kg; lognormal variance with pedigree 0.26298, pedigree (1,1,4,1,1)
  burden from direct release or incineration of landfill biogas.
  Uncertainty: U
- Chromium III [air, non-urban air or from high stacks]: 9.6773e-13 kg; lognormal variance with pedigree 0.78684, pedigree (1,1,4,1,1)
  (same comment as for Aluminium III)
- Chromium III [air, urban air close to ground]: 1.4096e-16 kg; lognormal variance with pedigree 0.54736, pedigree (1,1,4,1,1)
  (same comment as for Aluminium III)
- Cobalt II [air, non-urban air or from high stacks]: 2.3659e-11 kg; lognormal variance with pedigree 0.68622, pedigree (1,1,4,1,1)
  (same comment as for Aluminium III)
- Cobalt II [air, urban air close to ground]: 1.4798e-15 kg; lognormal variance with pedigree 0.44573, pedigree (1,1,4,1,1)
  (same comment as for Aluminium III)
- Copper ion [air, non-urban air or from high stacks]: 4.4636e-11 kg; lognormal variance with pedigree 0.65938, pedigree (1,1,4,1,1)
  (same comment as for Aluminium III)
- Copper ion [air, urban air close to ground]: 8.5411e-13 kg; lognormal variance with pedigree 0.41605, pedigree (1,1,4,1,1)
  (same comment as for Aluminium III)
- Cyanide [air, urban air close to ground]: 8.2002e-9 kg; lognormal variance with pedigree 0.13324, pedigree (1,1,4,1,1)
  (same comment as for Aluminium III)
- Dinitrogen monoxide [air, urban air close to ground]: 8.0433e-7 kg; lognormal variance with pedigree 0.095763, pedigree (1,1,4,1,1)
  (same comment as for Aluminium III)
- Heat, waste [air, non-urban air or from high stacks]: 0.12591 MJ; lognormal variance with pedigree 0.13012, pedigree (1,1,4,1,1)
  burden from direct release or incineration of landfill biogas.
  Uncertainty: U
- Heat, waste [air, urban air close to ground]: 0.0078468 MJ; lognormal variance with pedigree 0.079869, pedigree (1,1,4,1,1)
  (same comment as for ammonia, anhydrous, liquid)
- Hydrochloric acid [air, non-urban air or from high stacks]: 2.2841e-6 kg; lognormal variance with pedigree 0.31114, pedigree (1,1,4,1,1)
  (same comment as for Aluminium III)
- Hydrogen fluoride [air, non-urban air or from high stacks]: 5.1758e-7 kg; lognormal variance with pedigree 0.36057, pedigree (1,1,4,1,1)
  (same comment as for Aluminium III)
- Iron ion [air, non-urban air or from high stacks]: 5.0863e-11 kg; lognormal variance with pedigree 0.65627, pedigree (1,1,4,1,1)
  (same comment as for Aluminium III)
- Iron ion [air, urban air close to ground]: 4.7828e-11 kg; lognormal variance with pedigree 0.35872, pedigree (1,1,4,1,1)
  (same comment as for Aluminium III)
- Lead II [air, non-urban air or from high stacks]: 2.4914e-12 kg; lognormal variance with pedigree 0.75447, pedigree (1,1,4,1,1)
  (same comment as for Aluminium III)
- Lead II [air, urban air close to ground]: 2.4719e-13 kg; lognormal variance with pedigree 0.51216, pedigree (1,1,4,1,1)
  (same comment as for Aluminium III)
- Manganese II [air, non-urban air or from high stacks]: 1.1439e-11 kg; lognormal variance with pedigree 0.71109, pedigree (1,1,4,1,1)
  (same comment as for Aluminium III)
- Manganese II [air, urban air close to ground]: 1.2271e-16 kg; lognormal variance with pedigree 0.47776, pedigree (1,1,4,1,1)
  (same comment as for Aluminium III)
- Mercury II [air, non-urban air or from high stacks]: 3.8315e-10 kg; lognormal variance with pedigree 0.59506, pedigree (1,1,4,1,1)
  (same comment as for Aluminium III)
- Mercury II [air, urban air close to ground]: 1.6217e-15 kg; lognormal variance with pedigree 0.57895, pedigree (1,1,4,1,1)
  (same comment as for Aluminium III)
- Methane, fossil [air, non-urban air or from high stacks]: 0.0027916 kg; lognormal variance with pedigree 0.11137, pedigree (1,1,4,1,1)
  burden from direct release or incineration of landfill biogas.
  Uncertainty: U
- Methane, fossil [air, urban air close to ground]: 1.3428e-6 kg; lognormal variance with pedigree 0.22548, pedigree (1,1,4,1,1)
  (same comment as for Aluminium III)
- Molybdenum VI [air, non-urban air or from high stacks]: 5.2665e-13 kg; lognormal variance with pedigree 0.81053, pedigree (1,1,4,1,1)
  (same comment as for Aluminium III)
- Molybdenum VI [air, urban air close to ground]: 2.075e-12 kg; lognormal variance with pedigree 0.54837, pedigree (1,1,4,1,1)
  (same comment as for Aluminium III)
- NMVOC, non-methane volatile organic compounds [air, non-urban air or from high stacks]: 2.483e-8 kg; lognormal variance with pedigree 0.11137, pedigree (1,1,4,1,1)
  burden from direct release or incineration of landfill biogas.
  Uncertainty: U
- NMVOC, non-methane volatile organic compounds [air, urban air close to ground]: 6.0981e-9 kg; lognormal variance with pedigree 0.25457, pedigree (1,1,4,1,1)
  (same comment as for Aluminium III)
- Nickel II [air, non-urban air or from high stacks]: 1.0206e-10 kg; lognormal variance with pedigree 0.63548, pedigree (1,1,4,1,1)
  (same comment as for Aluminium III)
- Nickel II [air, urban air close to ground]: 6.9345e-15 kg; lognormal variance with pedigree 0.3942, pedigree (1,1,4,1,1)
  (same comment as for Aluminium III)
- Nitrogen oxides [air, non-urban air or from high stacks]: 1.7946e-7 kg; lognormal variance with pedigree 0.2508, pedigree (1,1,4,1,1)
  burden from direct release or incineration of landfill biogas.
  Uncertainty: U
- Nitrogen oxides [air, urban air close to ground]: 2.8503e-6 kg; lognormal variance with pedigree 0.105958, pedigree (1,1,4,1,1)
  (same comment as for Aluminium III)
- Particulate Matter, < 2.5 um [air, non-urban air or from high stacks]: 4.406e-7 kg; lognormal variance with pedigree 0.17653, pedigree (1,1,4,1,1)
  (same comment as for Aluminium III)
- Phosphorus [air, urban air close to ground]: 2.1264e-10 kg; lognormal variance with pedigree 0.38023, pedigree (1,1,4,1,1)
  (same comment as for Aluminium III)
- Potassium I [air, non-urban air or from high stacks]: 4.2537e-10 kg; lognormal variance with pedigree 0.59092, pedigree (1,1,4,1,1)
  (same comment as for Aluminium III)
- Selenium IV [air, non-urban air or from high stacks]: 5.16e-13 kg; lognormal variance with pedigree 0.81119, pedigree (1,1,4,1,1)
  (same comment as for Aluminium III)
- Selenium IV [air, urban air close to ground]: 5.1122e-18 kg; lognormal variance with pedigree 0.57549, pedigree (1,1,4,1,1)
  (same comment as for Aluminium III)
- Silicon [air, non-urban air or from high stacks]: 4.4274e-10 kg; lognormal variance with pedigree 0.58805, pedigree (1,1,4,1,1)
  (same comment as for Aluminium III)
- Silicon [air, urban air close to ground]: 3.8756e-9 kg; lognormal variance with pedigree 0.32672, pedigree (1,1,4,1,1)
  (same comment as for Aluminium III)
- Sodium [air, non-urban air or from high stacks]: 1.3227e-9 kg; lognormal variance with pedigree 0.55418, pedigree (1,1,4,1,1)
  (same comment as for Aluminium III)
- Strontium [air, non-urban air or from high stacks]: 1.1988e-11 kg; lognormal variance with pedigree 0.70643, pedigree (1,1,4,1,1)
  (same comment as for Aluminium III)
- Strontium [air, urban air close to ground]: 2.3617e-12 kg; lognormal variance with pedigree 0.44882, pedigree (1,1,4,1,1)
  (same comment as for Aluminium III)
- Sulfur dioxide [air, non-urban air or from high stacks]: 3.9104e-7 kg; lognormal variance with pedigree 0.38915, pedigree (1,1,4,1,1)
  burden from direct release or incineration of landfill biogas.
  Uncertainty: U
- Thallium I [air, non-urban air or from high stacks]: 5.4185e-14 kg; lognormal variance with pedigree 0.88365, pedigree (1,1,4,1,1)
  (same comment as for Aluminium III)
- Thallium I [air, urban air close to ground]: 1.0675e-13 kg; lognormal variance with pedigree 0.62262, pedigree (1,1,4,1,1)
  (same comment as for Aluminium III)
- Tin ion [air, non-urban air or from high stacks]: 3.9287e-12 kg; lognormal variance with pedigree 0.73862, pedigree (1,1,4,1,1)
  (same comment as for Aluminium III)
- Tin ion [air, urban air close to ground]: 1.2127e-11 kg; lognormal variance with pedigree 0.48204, pedigree (1,1,4,1,1)
  (same comment as for Aluminium III)
- Titanium ion [air, non-urban air or from high stacks]: 5.2262e-10 kg; lognormal variance with pedigree 0.58285, pedigree (1,1,4,1,1)
  (same comment as for Aluminium III)
- Titanium ion [air, urban air close to ground]: 1.0296e-9 kg; lognormal variance with pedigree 0.322, pedigree (1,1,4,1,1)
  (same comment as for Aluminium III)
- Vanadium V [air, non-urban air or from high stacks]: 1.3166e-13 kg; lognormal variance with pedigree 0.85542, pedigree (1,1,4,1,1)
  (same comment as for Aluminium III)
- Vanadium V [air, urban air close to ground]: 2.5937e-14 kg; lognormal variance with pedigree 0.59728, pedigree (1,1,4,1,1)
  (same comment as for Aluminium III)
- Zinc II [air, non-urban air or from high stacks]: 3.7959e-11 kg; lognormal variance with pedigree 0.66759, pedigree (1,1,4,1,1)
  (same comment as for Aluminium III)
- Zinc II [air, urban air close to ground]: 1.928e-12 kg; lognormal variance with pedigree 0.41009, pedigree (1,1,4,1,1)
  (same comment as for Aluminium III)
- Heat, waste [soil, industrial]: 0.17405 MJ; lognormal variance with pedigree 0.11359, pedigree (1,1,4,1,1)
  burden from short-term decomposition of waste (0-100a).
  Uncertainty: U
- Aluminium III [water, ground-, long-term]: 0.0020197 kg; lognormal variance with pedigree 0.14953, pedigree (1,1,4,1,1)
  Emissions from long-term leachate (>100a) directly from MSW landfill and indirectly via incineration of treatement sludge from leachate treatement.
  Uncertainty: U
- Aluminium III [water, surface water]: 6.0572e-8 kg; lognormal variance with pedigree 0.33727, pedigree (1,1,4,1,1)
  (same comment as for Aluminium III)
- Ammonium [water, ground-, long-term]: 0.0052082 kg; lognormal variance with pedigree 0.091863, pedigree (1,1,4,1,1)
  (same comment as for Aluminium III)
- Ammonium [water, surface water]: 0.00015824 kg; lognormal variance with pedigree 0.11192, pedigree (1,1,4,1,1)
  (same comment as for Aluminium III)
- Antimony ion [water, ground-, long-term]: 0.00047158 kg; lognormal variance with pedigree 0.45841, pedigree (1,1,4,1,1)
  (same comment as for Aluminium III)
- Antimony ion [water, surface water]: 3.4266e-6 kg; lognormal variance with pedigree 0.28493, pedigree (1,1,4,1,1)
  (same comment as for Aluminium III)
- Arsenic ion [water, ground-, long-term]: 9.9839e-6 kg; lognormal variance with pedigree 0.32487, pedigree (1,1,4,1,1)
  (same comment as for Aluminium III)
- Arsenic ion [water, surface water]: 1.5809e-8 kg; lognormal variance with pedigree 0.46943, pedigree (1,1,4,1,1)
  (same comment as for Aluminium III)
- BOD5, Biological Oxygen Demand [water, ground-, long-term]: 0.21046 kg; lognormal variance with pedigree 0.0083106, pedigree (1,1,4,1,1)
  (same comment as for Aluminium III)
- BOD5, Biological Oxygen Demand [water, surface water]: 4.7401e-5 kg; lognormal variance with pedigree 0.21337, pedigree (1,1,4,1,1)
  (same comment as for Aluminium III)
- Barium II [water, ground-, long-term]: 0.00013674 kg; lognormal variance with pedigree 0.23445, pedigree (1,1,4,1,1)
  (same comment as for Aluminium III)
- Barium II [water, surface water]: 9.4195e-8 kg; lognormal variance with pedigree 0.33139, pedigree (1,1,4,1,1)
  (same comment as for Aluminium III)
- Beryllium II [water, ground-, long-term]: 4.664e-7 kg; lognormal variance with pedigree 0.42481, pedigree (1,1,4,1,1)
  (same comment as for Aluminium III)
- Beryllium II [water, surface water]: 1.3758e-10 kg; lognormal variance with pedigree 0.60638, pedigree (1,1,4,1,1)
  (same comment as for Aluminium III)
- Bromine [water, ground-, long-term]: 0.0066266 kg; lognormal variance with pedigree 0.11154, pedigree (1,1,4,1,1)
  (same comment as for Aluminium III)
- Bromine [water, surface water]: 0.00017104 kg; lognormal variance with pedigree 0.17618, pedigree (1,1,4,1,1)
  Emissions from short-term leachate treatment.
  Uncertainty: U
- COD, Chemical Oxygen Demand [water, ground-, long-term]: 0.889 kg; lognormal variance with pedigree 0.0083106, pedigree (1,1,4,1,1)
  (same comment as for Aluminium III)
- COD, Chemical Oxygen Demand [water, surface water]: 0.0001506 kg; lognormal variance with pedigree 0.21267, pedigree (1,1,4,1,1)
  (same comment as for Aluminium III)
- Cadmium II [water, ground-, long-term]: 0.0001148 kg; lognormal variance with pedigree 0.24379, pedigree (1,1,4,1,1)
  (same comment as for Aluminium III)
- Cadmium II [water, surface water]: 1.0262e-7 kg; lognormal variance with pedigree 0.38904, pedigree (1,1,4,1,1)
  (same comment as for Aluminium III)
- Calcium II [water, ground-, long-term]: 0.0031732 kg; lognormal variance with pedigree 0.13519, pedigree (1,1,4,1,1)
  (same comment as for Aluminium III)
- Calcium II [water, surface water]: 3.728e-6 kg; lognormal variance with pedigree 0.28995, pedigree (1,1,4,1,1)
  (same comment as for Aluminium III)
- Chloride [water, ground-, long-term]: 0.0061393 kg; lognormal variance with pedigree 0.11388, pedigree (1,1,4,1,1)
  (same comment as for Aluminium III)
- Chloride [water, surface water]: 0.00015989 kg; lognormal variance with pedigree 0.17535, pedigree (1,1,4,1,1)
  Emissions from short-term leachate treatment.
  Uncertainty: U
- Chromium III [water, surface water]: 6.076e-12 kg; lognormal variance with pedigree 0.52727, pedigree (1,1,4,1,1)
  (same comment as for Aluminium III)
- Chromium VI [water, ground-, long-term]: 1.5067e-7 kg; lognormal variance with pedigree 2.1206, pedigree (1,1,4,1,1)
  (same comment as for Aluminium III)
- Chromium VI [water, surface water]: 2.0266e-9 kg; lognormal variance with pedigree 0.51918, pedigree (1,1,4,1,1)
  (same comment as for Aluminium III)
- Cobalt II [water, ground-, long-term]: 2.9424e-5 kg; lognormal variance with pedigree 0.28854, pedigree (1,1,4,1,1)
  (same comment as for Aluminium III)
- Cobalt II [water, surface water]: 4.8035e-8 kg; lognormal variance with pedigree 0.41521, pedigree (1,1,4,1,1)
  (same comment as for Aluminium III)
- Copper ion [water, ground-, long-term]: 0.0031941 kg; lognormal variance with pedigree 0.13504, pedigree (1,1,4,1,1)
  (same comment as for Aluminium III)
- Copper ion [water, surface water]: 4.0526e-8 kg; lognormal variance with pedigree 0.39812, pedigree (1,1,4,1,1)
  (same comment as for Aluminium III)
- DOC, Dissolved Organic Carbon [water, ground-, long-term]: 0.8128 kg; lognormal variance with pedigree 0.0083106, pedigree (1,1,4,1,1)
  (same comment as for Aluminium III)
- DOC, Dissolved Organic Carbon [water, surface water]: 3.6578e-5 kg; lognormal variance with pedigree 0.2132, pedigree (1,1,4,1,1)
  (same comment as for Aluminium III)
- Fluoride [water, ground-, long-term]: 0.00012941 kg; lognormal variance with pedigree 0.23978, pedigree (1,1,4,1,1)
  (same comment as for Aluminium III)
- Fluoride [water, surface water]: 9.539e-8 kg; lognormal variance with pedigree 0.41305, pedigree (1,1,4,1,1)
  Emissions from short-term leachate treatment.
  Uncertainty: U
- Heat, waste [water, ground-, long-term]: 35.924 MJ; lognormal variance with pedigree 0.020651, pedigree (1,1,4,1,1)
  burden from long-term decomposition of waste (>100a).
  Uncertainty: U
- Heat, waste [water, surface water]: 0.0043665 MJ; lognormal variance with pedigree 0.21252, pedigree (1,1,4,1,1)
  (same comment as for ammonia, anhydrous, liquid)
- Hydrogen sulfide [water, ground-, long-term]: 2.1757e-5 kg; lognormal variance with pedigree 0.21201, pedigree (1,1,4,1,1)
  (same comment as for Aluminium III)
- Iron ion [water, ground-, long-term]: 0.0014835 kg; lognormal variance with pedigree 0.15936, pedigree (1,1,4,1,1)
  (same comment as for Aluminium III)
- Iron ion [water, surface water]: 1.0374e-7 kg; lognormal variance with pedigree 0.38685, pedigree (1,1,4,1,1)
  (same comment as for Aluminium III)
- Lead II [water, ground-, long-term]: 0.00012699 kg; lognormal variance with pedigree 0.24052, pedigree (1,1,4,1,1)
  (same comment as for Aluminium III)
- Lead II [water, surface water]: 8.2159e-10 kg; lognormal variance with pedigree 0.49824, pedigree (1,1,4,1,1)
  (same comment as for Aluminium III)
- Manganese II [water, ground-, long-term]: 3.9736e-6 kg; lognormal variance with pedigree 0.35279, pedigree (1,1,4,1,1)
  (same comment as for Aluminium III)
- Manganese II [water, surface water]: 2.3223e-8 kg; lognormal variance with pedigree 0.44243, pedigree (1,1,4,1,1)
  (same comment as for Aluminium III)
- Mercury II [water, ground-, long-term]: 1.3987e-6 kg; lognormal variance with pedigree 0.3894, pedigree (1,1,4,1,1)
  (same comment as for Aluminium III)
- Mercury II [water, surface water]: 3.0316e-10 kg; lognormal variance with pedigree 0.56537, pedigree (1,1,4,1,1)
  (same comment as for Aluminium III)
- Molybdenum VI [water, ground-, long-term]: 7.7634e-7 kg; lognormal variance with pedigree 0.43334, pedigree (1,1,4,1,1)
  (same comment as for Aluminium III)
- Molybdenum VI [water, surface water]: 1.2463e-9 kg; lognormal variance with pedigree 0.53992, pedigree (1,1,4,1,1)
  (same comment as for Aluminium III)
- Nickel II [water, ground-, long-term]: 0.00070274 kg; lognormal variance with pedigree 0.18385, pedigree (1,1,4,1,1)
  (same comment as for Aluminium III)
- Nickel II [water, surface water]: 2.4765e-7 kg; lognormal variance with pedigree 0.36492, pedigree (1,1,4,1,1)
  (same comment as for Aluminium III)
- Nitrate [water, ground-, long-term]: 0.00054805 kg; lognormal variance with pedigree 0.091764, pedigree (1,1,4,1,1)
  (same comment as for Aluminium III)
- Nitrate [water, surface water]: 0.00057689 kg; lognormal variance with pedigree 0.099608, pedigree (1,1,4,1,1)
  (same comment as for Aluminium III)
- Nitrite [water, ground-, long-term]: 0.00028347 kg; lognormal variance with pedigree 0.091863, pedigree (1,1,4,1,1)
  (same comment as for Aluminium III)
- Nitrite [water, surface water]: 3.3249e-6 kg; lognormal variance with pedigree 0.15871, pedigree (1,1,4,1,1)
  (same comment as for Aluminium III)
- Nitrogen [water, surface water]: 4.2911e-6 kg; lognormal variance with pedigree 0.102293, pedigree (1,1,4,1,1)
  (same comment as for Aluminium III)
- Nitrogen, organic bound [water, ground-, long-term]: 0.0085124 kg; lognormal variance with pedigree 0.091863, pedigree (1,1,4,1,1)
  (same comment as for Aluminium III)
- Phosphate [water, ground-, long-term]: 0.0001236 kg; lognormal variance with pedigree 0.64429, pedigree (1,1,4,1,1)
  (same comment as for Aluminium III)
- Phosphate [water, surface water]: 3.6149e-7 kg; lognormal variance with pedigree 0.37162, pedigree (1,1,4,1,1)
  (same comment as for Aluminium III)
- Potassium I [water, ground-, long-term]: 0.0002313 kg; lognormal variance with pedigree 0.22039, pedigree (1,1,4,1,1)
  (same comment as for Aluminium III)
- Potassium I [water, surface water]: 1.7015e-6 kg; lognormal variance with pedigree 0.32094, pedigree (1,1,4,1,1)
  Emissions from short-term leachate treatment.
  Uncertainty: U
- Selenium IV [water, ground-, long-term]: 5.419e-7 kg; lognormal variance with pedigree 0.48132, pedigree (1,1,4,1,1)
  (same comment as for Aluminium III)
- Selenium IV [water, surface water]: 1.3786e-9 kg; lognormal variance with pedigree 0.54106, pedigree (1,1,4,1,1)
  (same comment as for Aluminium III)
- Silicon [water, ground-, long-term]: 7.3714e-5 kg; lognormal variance with pedigree 1.0682, pedigree (1,1,4,1,1)
  (same comment as for Aluminium III)
- Silicon [water, surface water]: 1.0657e-7 kg; lognormal variance with pedigree 0.3238, pedigree (1,1,4,1,1)
  (same comment as for Aluminium III)
- Sodium I [water, ground-, long-term]: 0.00012271 kg; lognormal variance with pedigree 0.24033, pedigree (1,1,4,1,1)
  (same comment as for Aluminium III)
- Sodium I [water, surface water]: 5.2907e-6 kg; lognormal variance with pedigree 0.29166, pedigree (1,1,4,1,1)
  Emissions from short-term leachate treatment.
  Uncertainty: U
- Strontium [water, ground-, long-term]: 8.2557e-5 kg; lognormal variance with pedigree 0.25475, pedigree (1,1,4,1,1)
  (same comment as for Aluminium III)
- Strontium [water, surface water]: 2.4352e-8 kg; lognormal variance with pedigree 0.43631, pedigree (1,1,4,1,1)
  (same comment as for Aluminium III)
- Sulfate [water, ground-, long-term]: 0.00083464 kg; lognormal variance with pedigree 0.21201, pedigree (1,1,4,1,1)
  (same comment as for Aluminium III)
- Sulfate [water, surface water]: 4.775e-6 kg; lognormal variance with pedigree 0.24741, pedigree (1,1,4,1,1)
  Emissions from short-term leachate treatment.
  Uncertainty: U
- TOC, Total Organic Carbon [water, ground-, long-term]: 0.8128 kg; lognormal variance with pedigree 0.0083106, pedigree (1,1,4,1,1)
  (same comment as for Aluminium III)
- TOC, Total Organic Carbon [water, surface water]: 3.8107e-5 kg; lognormal variance with pedigree 0.21279, pedigree (1,1,4,1,1)
  (same comment as for Aluminium III)
- Thallium I [water, ground-, long-term]: 3.731e-7 kg; lognormal variance with pedigree 0.432, pedigree (1,1,4,1,1)
  (same comment as for Aluminium III)
- Thallium I [water, surface water]: 1.1006e-10 kg; lognormal variance with pedigree 0.61353, pedigree (1,1,4,1,1)
  (same comment as for Aluminium III)
- Tin ion [water, ground-, long-term]: 0.00026699 kg; lognormal variance with pedigree 0.21586, pedigree (1,1,4,1,1)
  (same comment as for Aluminium III)
- Tin ion [water, surface water]: 6.5741e-9 kg; lognormal variance with pedigree 0.47253, pedigree (1,1,4,1,1)
  (same comment as for Aluminium III)
- Titanium ion [water, ground-, long-term]: 0.0041852 kg; lognormal variance with pedigree 0.12651, pedigree (1,1,4,1,1)
  (same comment as for Aluminium III)
- Titanium ion [water, surface water]: 1.0609e-6 kg; lognormal variance with pedigree 0.31291, pedigree (1,1,4,1,1)
  (same comment as for Aluminium III)
- Vanadium V [water, ground-, long-term]: 1.4271e-7 kg; lognormal variance with pedigree 0.52075, pedigree (1,1,4,1,1)
  (same comment as for Aluminium III)
- Vanadium V [water, surface water]: 2.6745e-10 kg; lognormal variance with pedigree 0.58477, pedigree (1,1,4,1,1)
  (same comment as for Aluminium III)
- Zinc II [water, ground-, long-term]: 0.00036083 kg; lognormal variance with pedigree 0.20586, pedigree (1,1,4,1,1)
  (same comment as for Aluminium III)
- Zinc II [water, surface water]: 5.282e-8 kg; lognormal variance with pedigree 0.3939, pedigree (1,1,4,1,1)
  (same comment as for Aluminium III)

## Review by Gabor Doka 2018-05-31
passed
