# lithium iron phosphate production, hydrothermal process

Dataset: EcoSpold 2, unit process
Geography: RoW
Time period: 2014-01-01 to 2025-12-31
Technology level: current
Classification: ISIC rev.4 ecoinvent: 2011:Manufacture of basic chemicals
Synonyms: LiFePO4; lithium iron phosphate
Scenario: Business-as-Usual
System model: Substitution, consequential, long-term
Generated by: Eleonora Crenna
Published in: Dunn, J. 2014
Database: ecoinvent
isCopyrightProtected: true

## General comment
This dataset represents the production of 1 kg lithium iron phosphate (LFP) via hydrothermal process, used as active material in the production of LFP cathodes in Li-ion batteries.

## Included activities start
The activity starts when the chemicals enter the process at the factory.

## Included activities end
The activity ends with the production at factory gate of LFP active material via hydrothermal process.

## Geography
This dataset is extrapolated from CN production to global.

## Technology
Lithium iron phosphate can be produced via hydrothermal process or solid state process. The hydrothermal process requires the use of reactants such as lithium hydroxide, phosphoric acid and iron sulfate, and heating of water in addition to the reactants.

The general reaction is the following:
3LiOH(aq) + H3PO4(aq) + FeSO4(aq) --> LiFePO4(s) + Li2SO4(aq) + 3H2O
Reference:

Dunn, J., James, C., Gaines, L., & Gallagher, K. (2014). Material and energy flow in the production of cathode and anode materials for lithium ion batteries. Argonne National Laboratory.

## Time period
The time period is from 2014 (year of the publication of data) and 2025 (assuming that this producing technology is still viable in the near future)

## Reference product
- lithium iron phosphate: 1 kg; name RefProd; By-product classification allocatable product; CPC 34240: Phosphates of triammonium; salts and peroxysalts of inorganic acids and metals n.e.c.; CAS 15365-14-7
  production volume 7.70446e6 kg
    The PV is expressed in kg. According to UN Comtrade (https://comtrade.un.org/data/, HS code: 850760) 619948187 kg Li-ion batteries were exported globally in 2019. Approximately 15% are LFP Li-ion batteries (Benchmark Mineral Intelligence, 2019. The Current Position of Li-ion Raw Material Supply and the Role of Recycling). LFP active material represents approximately 24% weight of a battery pack.
    Due to lack of specific information on the production share of lithium iron phosphate via hydrothermal and solid state process, the assumption of 1:1 ratio is applied here.
  property price 20.0412 EUR2005
    Converted to EUR2005. Approximate average from multiple vendors.
  properties: carbon allocation 0 kg, carbon content 0, carbon content, fossil 0, carbon content, non-fossil 0, dry mass 1 kg, iron content 0.1571, lithium content 0.0574, oxygen content 0.5293, phosphorus content 0.2562, water content 0, water in wet mass 0 kg, wet mass 1 kg

## Inputs from technosphere
- chemical factory, organics: 7.41e-10 unit; lognormal variance with pedigree 0.3818, pedigree (2,3,5,4,4)
  Calculated based on Annual production: 27000 metric ton cathode material (Dai et al., 2018); assumption 50yr lifetime chemical factory.
  Reference:
  Dai, Q., Kelly, J. C., Dunn, J., & Benavides, P. (2018). Update of Bill-of-Materials and Cathode Materials Production for Lithium-Ion Batteries in the GREET Model. 2018. Argonne National Laboratory.
- heat, district or industrial, natural gas: 33.1509 MJ; = 31.421*1055.056/1000; source Dunn, J. 2014; lognormal variance with pedigree 0.0425, pedigree (2,3,5,3,2)
  Literature. Original value 31.421 mmBTU/ton LFP taken from the more up-to-date version of GREET2 model (Argonne National LAboratory, 2019, Available at: https://greet.es.anl.gov/ ) and Dunn et al. (2014). Conversion factors: 1 mmBTU = 1,055.055853 MJ
  Reference:
  Dunn, J., James, C., Gaines, L., & Gallagher, K. (2014). Material and energy flow in the production of cathode and anode materials for lithium ion batteries. Argonne National Laboratory.
  properties: heating value, net 1 MJ
- iron sulfate: 0.64464, 0.31836 kg (2 suppliers, which the file names only by identifier); sum of these 0.963 kg; source Dunn, J. 2014; lognormal variance with pedigree 0.0425, pedigree (2,3,5,3,2)
  Literature, Input values are based on the following reaction: 3LiOH(aq) + H3PO4(aq) + FeSO4(aq) --> LiFePO4(s) + Li2SO4(aq) + 3H2O
  properties: dry mass 1 kg, wet mass 1 kg
- lithium hydroxide: 0.456 kg; name lithium_hydroxide; source Dunn, J. 2014; lognormal variance with pedigree 0.0425, pedigree (2,3,5,3,2)
  (same comment as for iron sulfate)
  properties: dry mass 1 kg, heating value, net 5.06 MJ, wet mass 1 kg
- lithium sulfate: -0.69697 kg; name lithium_sulfate; = 109.94*RefProd/157.74; lognormal variance with pedigree 0.0425, pedigree (2,3,5,3,2)
  Calculated value, based on stoichiometry from the following reaction: 3LiOH(aq) + H3PO4(aq) + FeSO4(aq) --> LiFePO4(s) + Li2SO4(aq) + 3H2O. LiFePO4 MW= 157.74 g/mol, Li2SO4 MW= 109.94 g/mol
  production volume
    Calculated from production volume of reference product using the relative outputs.
  properties: dry mass 1 kg, price 6.68039 EUR2005, wet mass 1 kg
- phosphoric acid, industrial grade, without water, in 85% solution state: 0.621 kg; name phosphoric_acid; lognormal variance with pedigree 0.0425, pedigree (2,3,5,3,2)
  (same comment as for iron sulfate)
  properties: dry mass 1 kg, wet mass 1 kg
- tap water: 43.7727 kg; name water_input; = iron_sulfate_input * 1 /0.022; source Dunn, J. 2014; lognormal variance with pedigree 0.0425, pedigree (2,3,5,3,2)
  Calculated value, based on FeSO4 concentration in water: 22 g/L.
  properties: carbon content, fossil 0.00178991, dry mass 0.000337476 kg, water content 2962.17, wet mass 1 kg
  note on carbon content, fossil: Bicarbonate content is 2.93 mol/m3. CO2 content is 0.1 mol/m3 (ecoinvent v2.2 report 8, Tab 93.1).
- wastewater, average: -0.0084042, -0.000125134, -0.0351463, -0.00021121 m3 (4 suppliers, which the file names only by identifier); sum of these -0.0438868 m3; = water_input/1000 + 18 * RefProd/157.74/1000; lognormal variance with pedigree 0.0425, pedigree (2,3,5,3,2)
  Calculated value, to obtain mass balance.
  production volume
    Calculated from production volume of reference product using the relative outputs.
  properties: carbon content, non-fossil 0.194039, dry mass 0.346837 kg, water content 2882.2, wet mass 1000 kg
  note on carbon content, non-fossil: 0.0673 kg TOC/m3 (Tab A.17, ecoinvent v2.2 report 13_I). TOC was considered as Total Carbon.

## Emissions to nature
- Water [air, non-urban air or from high stacks]: 0.00034303 m3; = (iron_sulfate_input + lithium_hydroxide + phosphoric_acid - RefProd - lithium_sulfate) /1000; lognormal variance with pedigree 0.0819, pedigree (2,3,5,3,2)
  Calculated value to obtain mass balance, based on the following reaction: 3LiOH(aq) + H3PO4(aq) + FeSO4(aq) --> LiFePO4(s) + Li2SO4(aq) + 3H2O

## Sampling procedure
The data about the production process of LFP are retrieved from the literature (Dunn et al., 2014).

Reference:
Dunn, J., James, C., Gaines, L., & Gallagher, K. (2014). Material and energy flow in the production of cathode and anode materials for lithium ion batteries. Argonne National Laboratory.

## Extrapolations
This dataset was extrapolated from national producers to global.
