# sawdust, wet, measured as dry mass to generic market for residual softwood, wet

Dataset: EcoSpold 2, unit process
Geography: RoW
Time period: 2014-01-01 to 2022-12-31
Technology level: current
Classification: ISIC rev.4 ecoinvent: 1610:Sawmilling and planing of wood
Scenario: Business-as-Usual
System model: Substitution, consequential, long-term
Generated by: Emilia Moreno Ruiz
Database: ecoinvent
isCopyrightProtected: true

## General comment
This activity is linking the more specific market for saw dust, to the more generic market for residual softwood, wet; and residual hardwood, wet.It makes accesible the specific product saw dust through the more generic products of wet residual wood.
[This dataset is meant to replace the following datasets:]
[This dataset is meant to replace the following datasets:]

## Included activities start
Entry of the specific product "saw dust, wet, measured as dry mass"

## Included activities end
Delivery of the generic products "residual softwood, wet" and "residual hardwood, wet"

## Reference product
- sawdust, wet, measured as dry mass: 1 kg; = (residual_softwood_wet_DM* residual_softwood_wet)+ (residual_hardwood_wet_DM* residual_hardwood_wet); By-product classification allocatable product; CPC 3928: Sawdust and wood waste and scrap
  Calculated using the Dry Mass of the reference product and the by-product. It has been considered that this product feeds the generic markets for "residual hardwood, wet" and "residual softwood, wet" in a 50%:50% share.
  property heating value, net 7.79 MJ
    LHV is calculated based on the Carbon content of the product. More details can be found on the respective documentation.
  properties: carbon allocation 0.494 kg, carbon content 0.494, carbon content, fossil 0, carbon content, non-fossil 0.494, dry mass 1 kg, price 0 EUR2005, water content 0.7, water in wet mass 0.7 kg, wet mass 1.7 kg

## Inputs from technosphere
- residual hardwood, wet: 0.000909091 m3; name residual_hardwood_wet
  production volume
    3.56E+10 kg is the rough Production Volumes of saw dust produced out of sawing, at a global level. It is considered that 10% of this volume is consumed as the more generic product "residual hardwood, wet", and 10% as "residual softwood, wet". The Dry Mass of those products is used to calculate the Production Volumes in m3.
  properties: carbon content, non-fossil 0.494, dry mass 650 kg, heating value, net 8612.79 MJ, price 41.8 EUR2005, water content 0.7, wet mass 1105 kg
- residual softwood, wet: 0.000909091 m3; name residual_softwood_wet
  production volume
    3.56E+10 kg is the rough Production Volumes of saw dust produced out of sawing at a global level. It is considered that 10% of this volume is consumed as the more generic product "residual hardwood, wet", and 10% as "residual softwood, wet". The Dry Mass of those products is used to calculate the Production Volumes in m3.
  properties: carbon content, non-fossil 0.494, dry mass 450 kg, heating value, net 5962.7 MJ, price 19.5 EUR2005, water content 0.7, wet mass 765 kg
