# fibre production, cotton, ginning

Dataset: EcoSpold 2, unit process
Geography: RoW
Time period: 2016-01-01 to 2022-12-31
Technology level: current
Classification: ISIC rev.4 ecoinvent: 0163:Post-harvest crop activities
Scenario: Business-as-Usual
System model: Substitution, consequential, long-term
Generated by: Mireille Faist Emmenegger
Published in: Cotton Inc 2017
Database: ecoinvent
isCopyrightProtected: true

## General comment
A global average for cotton ginning was developed based on the regional ginning data provided by Cotton Incorporated questionnaires. Data was available for several regions in the three main cotton-producing countries (China, India, and USA).The final global dataset was obtained by averaging the data with each country’s weighting factor, calculated from the seed cotton production volume of each country scaled to 100% (US: 21%; CN 39%; IN 40%).
Ginning process involves the separation of cotton lint from cotton seed. There are a number of techniques to do so. In general, seed cotton is first dried using dryers and it may then be passed through a suitable cleaning equipment for the removal of dirt. The cleaned and dried seed cotton is then passed through cotton ginning setup where the the lint is separated from seeds.

[This dataset is meant to replace the following datasets:
- cotton ginning, GLO, 2016 - 2017]

## Included activities start
Ginning process starts with the input of seed cotton into the ginning machine where the lint is separated from the seeds and the lint is collected as a continuous loose sheet. The machinery and infrastructure are not included in the process.

## Included activities end
The loose continuous sheet of lint is then put into a hydraulic press machine to press the lint into bales. The seed is collected separately and are stored for future use in farming or are sent to allied industries for further processing. The ginning process culminates with the output of bales of cotton and separated cotton seeds.

## Reference product
- fibre, cotton: 1 kg; By-product classification allocatable product; CPC 01921: Cotton, whether or not ginned
  production volume 1.81268e10 kg
    From the Fibre Year Report 2017 for 2016.
  property heating value, net 12.95 MJ
    LHV is calculated based on the Carbon content of the product. More details can be found on the respective documentation.
  property price 0.884 EUR2005
    Temporary price data. Calculated as 90% of purchasers price based on: 2005 World trade: Cotton lint import+export in USD divided by import+export in kg. From FAOSTAT, TradeSTAT, accesed 2011.06.22 <http://faostat.fao.org/site/535/DesktopDefault.aspx?PageID=535#ancor>
  properties: carbon allocation 0.4324 kg, carbon content 0.46, carbon content, fossil 0, carbon content, non-fossil 0.46, dry mass 0.94 kg, water content 0.0638298, water in wet mass 0.06 kg, wet mass 1 kg

## Inputs from technosphere
- cottonseed: -1.63 kg; name seed
  production volume
    Calculated from the share of cotton seed and from the production volume of fibre.
  properties: carbon content, non-fossil 0.50932, dry mass 0.94 kg, price 0.142 EUR2005, water content 0.0638298, wet mass 1 kg
- electricity, medium voltage: 0.0155408, 0.00229497, 0.000183431, 0.00332665, 4.62133e-5, 5.27415e-5, 0.000377124, 0.00191607, 8.77623e-5, 0.000193054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 kWh (45 suppliers, which the file names only by identifier); sum of these 0.15568 kWh; lognormal variance with pedigree 0.0039, pedigree (2,3,3,3,1)
  Electricity for ginning machine
- heat, central or small-scale, natural gas: 0.103365 MJ; lognormal variance with pedigree 0.0039, pedigree (2,3,3,3,1)
  Fuel use for dryer.
  properties: heating value, net 1 MJ
- seed-cotton: 2.63 kg; lognormal variance with pedigree 0.0039, pedigree (2,3,3,3,1)

## Extrapolations
This dataset is extrapolated from data from the three main cotton producing countries CN, IN and US.
