# 2-butanol production by hydration of butene

Dataset: EcoSpold 2, unit process
Geography: RoW
Time period: 1981-01-01 to 2022-12-31
Technology level: current
Classification: EcoSpold01Categories: chemicals/organics
Classification: ISIC rev.4 ecoinvent: 2011:Manufacture of basic chemicals
Tags: ConvertedDataset
Scenario: Business-as-Usual
System model: Substitution, consequential, long-term
Share of production covered: 100 %
Generated by: Jürgen Sutter
Published in: Sutter, J. 2007
Database: ecoinvent
isCopyrightProtected: true

## General comment
The multioutput-process "butene hydration" delivers the co-products 2-butanol and butanes from butenes. The allocation is based on mass balance.
[This dataset was already contained in the ecoinvent database version 2. It was not individually updated during the transfer to ecoinvent version 3. Life Cycle Impact Assessment results may still have changed, as they are affected by changes in the supply chain, i.e. in other datasets. This dataset was generated following the ecoinvent quality guidelines for version 2. It may have been subject to central changes described in the ecoinvent version 3 change report (http://www.ecoinvent.org/database/ecoinvent-version-3/reports-of-changes/), and the results of the central updates were reviewed extensively. The changes added e.g. consistent water flows and other information throughout the database. The documentation of this dataset can be found in the ecoinvent reports of version 2, which are still available via the ecoinvent website. The change report linked above covers all central changes that were made during the conversion process.]

## Included activities end
Hydration of butene including materials, energy uses, infrastructure and emissions.

## Geography
The inventory is modelled for Europe.

## Technology
Hydration of butene

## Time period
Time of publications.

## Parameters
- fraction, cooling water, cooling pond system, to air: 0.032 dimensionless; name fraction_CW_CP_to_air; lognormal variance with pedigree 0.0413, pedigree (2,3,1,3,1)
  Calculated based on literature value (Scown, C.D., 2011, Water Footprint of U.S. Transportation Fuels and supplying information of the article) (Vionnet, S., Quantis Water Database - Technical Report, 2012).
- fraction, cooling water, once-through system, to air: 0.004 dimensionless; name fraction_CW_OT_to_air; lognormal variance with pedigree 0.0413, pedigree (2,3,1,3,1)
  (same comment as for fraction, cooling water, cooling pond system, to air)
- fraction, cooling water, recirculating system, to air: 0.771 dimensionless; name fraction_CW_R_to_air; lognormal variance with pedigree 0.0413, pedigree (2,3,1,3,1)
  (same comment as for fraction, cooling water, cooling pond system, to air)
- fraction, cooling water, to air: 0.3875 dimensionless; name fraction_CW_to_air; = (0.5*fraction_CW_OT_to_air)+(0.5*fraction_CW_R_to_air); lognormal variance with pedigree 0.092025, pedigree (4,4,3,2,4)
  Calculated value based on literature value (see comments of the other parametres present in this dataset) and expert opinion. In the case when no industry/literature data are available about the type of cooling or directly fraction, cooling water, to air specific for the process a default assumption is applied. It is assumed that the once-through cooling system is used in 50% of all cases and recirculating system is used in another 50% of all cases.
- fraction, process water, to air: 0.205 dimensionless; name fraction_PW_to_air; lognormal variance with pedigree 0.092025, pedigree (4,4,3,2,4)
  Literature value (Statistics Canada, 2007 & Shaffer, K.H., 2008, Consumptive water use in the Great Lakes Basin, USGS) (Vionnet, S., Quantis Water Database - Technical Report, 2012).
- fraction, water, deionised, to air: 0.205 dimensionless; name fraction_WDI_to_air; = fraction_PW_to_air; lognormal variance with pedigree 0.092025, pedigree (4,4,3,2,4)
  Calculated value. See comment in the other parametres present in this dataset. Deionised water is considered to be always used as process water, thus process water fractions to air are applied to all deionised water input flows to calculate the amount of water consumed in the processes.

## Reference product
- 2-butanol: 1 kg; By-product classification allocatable product; CPC 34139: Other alcohols, phenols, phenol-alcohols, and their halogenated, sulphonated, nitrated or nitrosated derivativ[…]; CAS 78-92-2
  EcoSpold01Location=RER
  production volume 4.8125e8 kg
    Estimated as the same amount as methyl ethyl ketone, which is the main use of 2-butanol
  property heating value, net 35.99 MJ
    LHV is calculated based on the elemental composition of the substance. Based on the CAS number of the substance (000078-92-2), the chemical formula of the substance is found to be: C4H10O, (PubChem 2020).
    Reference: Kim, S., Chen, J., Cheng, T., Gindulyte, A., He, J., He, S., Li, Q., Shoemaker, B. A., Thiessen, P. A., Yu, B., Zaslavsky, L., Zhang, J., & Bolton, E. E. (2019). PubChem 2019 update: improved access to chemical data. Nucleic acids research, 47(D1), D1102–D1109. https://doi.org/10.1093/nar/gky1033
  property price 0.546 EUR2005
    Temporary price data. Calculated as 90% of purchasers price based on: 2004 import and export prices (total trades (USD) divided by total weight (kg) in EU27, USA, China, Japan and India) from UN Commodity Trade Statistics Database (http://data.un.org/Explorer.aspxDatabase [Accessed 2 July 2010]). Commodity: 'Butanols nes'
  properties: EcoSpold01Allocation_undefined_1 100, EcoSpold01Allocation_undefined_10 76.92, EcoSpold01Allocation_undefined_11 76.92, EcoSpold01Allocation_undefined_12 76.92, EcoSpold01Allocation_undefined_13 76.92, EcoSpold01Allocation_undefined_14 76.92, EcoSpold01Allocation_undefined_15 76.92, EcoSpold01Allocation_undefined_16 76.92, EcoSpold01Allocation_undefined_17 76.92, EcoSpold01Allocation_undefined_18 76.92, EcoSpold01Allocation_undefined_19 76.92, EcoSpold01Allocation_undefined_2 76.92, EcoSpold01Allocation_undefined_20 76.92, EcoSpold01Allocation_undefined_21 76.92, EcoSpold01Allocation_undefined_3 76.92, EcoSpold01Allocation_undefined_4 76.92, EcoSpold01Allocation_undefined_5 76.92, EcoSpold01Allocation_undefined_6 76.92, EcoSpold01Allocation_undefined_7 76.92, EcoSpold01Allocation_undefined_8 76.92, EcoSpold01Allocation_undefined_9 76.92, carbon allocation 0.648649 kg, carbon content 0.648649, carbon content, fossil 0.648649, carbon content, non-fossil 0, dry mass 1 kg, water content 0, water in wet mass 0 kg, wet mass 1 kg

## Inputs from technosphere
- butane: -0.300002 kg
  EcoSpold01Location=RER
  production volume
    Calculated in proportion to 2-butanol (0.3 kg / kg)
  properties: EcoSpold01Allocation_undefined_10 23.08, EcoSpold01Allocation_undefined_11 23.08, EcoSpold01Allocation_undefined_12 23.08, EcoSpold01Allocation_undefined_13 23.08, EcoSpold01Allocation_undefined_14 23.08, EcoSpold01Allocation_undefined_15 23.08, EcoSpold01Allocation_undefined_16 23.08, EcoSpold01Allocation_undefined_17 23.08, EcoSpold01Allocation_undefined_18 23.08, EcoSpold01Allocation_undefined_19 23.08, EcoSpold01Allocation_undefined_22 100, heating value, net 45.89 MJ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
- butene, mixed: 1.15001 kg; lognormal variance with pedigree 0.0726, pedigree (1,3,5,5,1)
  Chauvel 1989
  EcoSpold01Location=RER
  Uncertainty: Chauvel 1989
  properties: carbon content, fossil 0.857143, dry mass 1 kg, heating value, net 45.3 MJ, wet mass 1 kg
  note on carbon content, fossil: With mixed butenes, the four isomers 1-butene, cis-2-butene, trans-2-butene and isobutene are summed up. They are unsaturated olefinic hydrocarbons with the formula C4H8 (ecoinvent v2.2 report 11_II). MW=56
  note on heating value, net: Indicative value. Reference: Fuels - Higher and Lower Calorific Values, available at: https://www.engineeringtoolbox.com/fuels-higher-calorific-values-d_169.html
- chemical factory, organics: 5.19999e-10 unit; lognormal variance with pedigree 0.448, pedigree (4,5,5,5,5)
  Estimation
  EcoSpold01Location=RER
  Uncertainty: Estimation
- electricity, medium voltage: 0.0366346, 0.02538, 0.00136035, 0.302259, 0.00137069, 0.017415 kWh (6 suppliers, which the file names only by identifier); sum of these 0.38442 kWh; lognormal variance with pedigree 0.0726, pedigree (1,3,5,5,1)
  EcoSpold01Location=UCTE
  Chauvel 1989
  Uncertainty: Chauvel 1989
- heat, district or industrial, natural gas: 3.02883, 19.961 MJ (2 suppliers, which the file names only by identifier); sum of these 22.9898 MJ; lognormal variance with pedigree 0.0726, pedigree (1,3,5,5,1)
  Uncertainty: Chauvel 1989
  properties: heating value, net 1 MJ
- heat, district or industrial, other than natural gas: 12.8096, 0.0223678 MJ (2 suppliers, which the file names only by identifier); sum of these 12.832 MJ; lognormal variance with pedigree 0.0726, pedigree (1,3,5,5,1)
  Uncertainty: Chauvel 1989
  properties: heating value, net 1 MJ
- sodium hydroxide, without water, in 50% solution state: 0.0219996 kg; lognormal variance with pedigree 0.0726, pedigree (1,3,5,5,1)
  Chauvel 1989
  EcoSpold01Location=RER
  Uncertainty: Chauvel 1989
  properties: dry mass 1 kg, heating value, net 3.03 MJ, wet mass 1 kg
- sulfuric acid: 0.00900007 kg; lognormal variance with pedigree 0.0726, pedigree (1,3,5,5,1)
  EcoSpold01Location=RER
  Chauvel 1989
  Uncertainty: Chauvel 1989
  properties: dry mass 1 kg, wet mass 1 kg
- water, deionised: 14.9995 kg; name water_deionised_input; lognormal variance with pedigree 0.0726, pedigree (1,3,5,5,1)
  EcoSpold01Location=CH
  Chauvel 1989
  Uncertainty: Chauvel 1989
  properties: wet mass 1 kg

## Inputs from nature
- Water, cooling, unspecified natural origin [natural resource, in water]: 0.580006 m3; name water_cooling_UNO_input; lognormal variance with pedigree 0.0726, pedigree (1,3,5,5,1)
  Chauvel 1989
  Uncertainty: Chauvel 1989

## Emissions to nature
- Butene [air, urban air close to ground]: 0.0207174 kg; lognormal variance with pedigree 0.188, pedigree (4,5,5,5,5)
  Estimation
  Uncertainty: Estimation
- Carbon dioxide, fossil [air, urban air close to ground]: 0.234406 kg; lognormal variance with pedigree 0.1786, pedigree (4,5,5,5,5)
  Calculated from the water treatment
  Uncertainty: Calculated from the water treatment
- Water [air, unspecified]: 0.227828 m3; name water_to_air_unspecified; lognormal variance with pedigree 0.0827, pedigree (2,2,5,5,1)
  Calculated value based on literature values and expert opinion. See comments in the parametres' comment field.
  property fraction, origin: fresh water 0.0134967; name fraction_origin_fresh_water
  property fraction, origin: salt water 0; name fraction_origin_salt_water
  property fraction, origin: unspecified 0.986503; name fraction_origin_unspecified
- BOD5, Biological Oxygen Demand [water, surface water]: 0.0272552 kg; lognormal variance with pedigree 0.188, pedigree (4,5,5,5,5)
  Calculated from the water emissions
  Uncertainty: Calculated from the water emissions
- Butene [water, surface water]: 0.00828706 kg; lognormal variance with pedigree 0.448, pedigree (4,5,5,5,5)
  Estimation
  Uncertainty: Estimation
- COD, Chemical Oxygen Demand [water, surface water]: 0.0272552 kg; lognormal variance with pedigree 0.188, pedigree (4,5,5,5,5)
  Calculated from the water emissions
  Uncertainty: Calculated from the water emissions
- DOC, Dissolved Organic Carbon [water, surface water]: 0.00709554 kg; lognormal variance with pedigree 0.188, pedigree (4,5,5,5,5)
  Calculated from the water emissions
  Uncertainty: Calculated from the water emissions
- Sodium I [water, surface water]: 0.0126501 kg; lognormal variance with pedigree 0.798, pedigree (4,5,5,5,5)
  Calculated from the input
  Uncertainty: Calculated from the input
- Sulfate [water, surface water]: 0.00881641 kg; lognormal variance with pedigree 0.188, pedigree (4,5,5,5,5)
  Calculated from the input
  Uncertainty: Calculated from the input
- TOC, Total Organic Carbon [water, surface water]: 0.00709554 kg; lognormal variance with pedigree 0.188, pedigree (4,5,5,5,5)
  Calculated from the water emissions
  Uncertainty: Calculated from the water emissions
- Water [water, unspecified]: 0.36718 m3; name water_to_water_unspecified; lognormal variance with pedigree 0.0827, pedigree (2,2,5,5,1)
  (same comment as for Water)
  property carbon content, fossil 0; name C_content_fossil
  property carbon content, non-fossil 0; name C_content_non_fossil
  property fraction, origin: fresh water 0.0324764; name fraction_origin_fresh_water_Ww
  property fraction, origin: salt water 0; name fraction_origin_salt_water_Ww
  property fraction, origin: unspecified 0.967524; name fraction_origin_unspecified_Ww
  property water in wet mass 1000 kg; name WWM

## Sampling procedure
Literature data

## Extrapolations
Transports and emissions are modelled with standard methods. This dataset has been copied from an original dataset covering the geography RER. The uncertainty has been adjusted accordingly.

## Review by Roland Hischier 2007-09-20
passed.
-
