# resorcinol production, hydroperoxidation of meta-diisopropylbenzene

Dataset: EcoSpold 2, unit process
Geography: GLO
Time period: 2022-01-01 to 2022-12-31
Technology level: current
Classification: ISIC rev.4 ecoinvent: 2011:Manufacture of basic chemicals
Synonyms: 1,3-Benzenediol; 1,3-Dihydroxybenzene; m-Dihydroxybenzene; m-Benzenediol
Scenario: Business-as-Usual
System model: Substitution, consequential, long-term
Generated by: Daria Dellenbach
Database: ecoinvent
isCopyrightProtected: true

## General comment
This dataset represents the production of resorcinol by dialkylation of benzene. The process includes dialkylation of benzene with propylene to give 1,3-diisopropylbenzene followed by oxidation and Hock rearrangement to give acetone and resorcinol.
Resorcinol is an organic substance with a CAS no.: 000108-46-3. It is called benzene-1,3-diol under IUPAC naming and its molecular formula is: C6H6O2. It is solid under normal conditions of temperature and pressure as white flakes. It is modelled as a pure substance. On a consumer level, is used in the following products: cosmetics and personal care products. On industrial sites, the substance is used for the manufacture of products in the following sectors: chemicals, rubber products, plastic products, fabricated metal products and machinery and vehicles.
References:
Schmiedel K.W., Decker D. (2011): Resorcinol, Ullmann's Encyclopedia of Industrial Chemistry, Wiley-VCH.
ECHA: Resorcinol, available here: https://echa.europa.eu/substance-information/-/substanceinfo/100.003.260, last accessed 20-07-2022.
Thebeeapelo J. K. (2002): The investigation of the hydrolysis reaction of m-phenylene diamine to resorcinol, Master Thesis, Port Elizabeth Technikon.
[This dataset is meant to replace the following datasets:]

## Included activities start
With benzene dialkylation.

## Included activities end
With production of resorcinol. It includes raw materials, and energy. Emissions to air and water as well as infrastructure are estimated.

## Technology
Benzene is dialkylated with propene in the liquid phase by using an AlCl3 – HCl catalyst (neglected in the inventory). The cleavage of m-diisopropylbenzene dihydroperoxide to resorcinol and acetone is carried out under acid catalysis (1 % H2SO4) with a reaction time of 30 min. After neutralization, acetone is distilled off at normal pressure and resorcinol under vacuum. The overall process yield is ca. 75 %, based on benzene.
Acetone is a valuable by-product.
C6H6 + 2 C3H6 --> C12H18
C12H18 +2 O2 --> C6H6O2 + 2 C3H6O
References:
Schmiedel K.W., Decker D. (2011): Resorcinol, Ullmann's Encyclopedia of Industrial Chemistry, Wiley-VCH.
Thebeeapelo J. K. (2002): The investigation of the hydrolysis reaction of m-phenylene diamine to resorcinol, Master Thesis, Port Elizabeth Technikon.

## Reference product
- resorcinol: 1 kg; name RP; By-product classification allocatable product; CPC 34139: Other alcohols, phenols, phenol-alcohols, and their halogenated, sulphonated, nitrated or nitrosated derivativ[…]; CAS 108-46-3
  production volume 2.655e7 kg
    The global resorcinol market size was 59.0 kilotons in 2016. It is known, that the preferred production methods are benzene disulfonation and hydroperoxidation of meta-diisopropylbenzene over hydrolysis of meta-phenylenediamine, therefore the market shares were assumed to be 45%:45%:10%.
    References:
    Resorcinol Market Size, Share & Trends Analysis Report By Application (Rubber Products, Wood Adhesives, UV Stabilizers, Flame Retardants), By Region, And Segment Forecasts, 2018 - 2025, Report Overview, avaiable here: https://www.grandviewresearch.com/industry-analysis/resorcinol-market, last accessed 20-07-2022.
    Schmiedel K.W., Decker D. (2011): Resorcinol, Ullmann's Encyclopedia of Industrial Chemistry, Wiley-VCH.
  property price 9.02683 EUR2005
    The price is calculated based on price information 2020/2021 from chemAnalyst (available here: https://www.chemanalyst.com/Pricing-data/resorcinol-1191) and ECHEMI (available here: https://www.echemi.com/productsInformation/pd1804031006-995-pharmaceutical-intermediates-resorcinol.html), both sources last accessed 2022-06-15.
    The prices were converted to EUR based on the annual exchange rates published by the European Central Bank (https://sdw.ecb.europa.eu/quickview.do?SERIES_KEY=120.EXR.A.USD.EUR.SP00.A, last accessed on 2022-02-15) and adjusted for inflation relative to 2005 using the producer price index (PPI) of the euro area, published by eurostat (https://appsso.eurostat.ec.europa.eu/nui/show.do?dataset=sts_inpp_a&lang=en, last accessed on 2022-05-04).
  properties: carbon allocation 0.653951 kg, carbon content 0.653951, carbon content, fossil 0.653951, carbon content, non-fossil 0, dry mass 1 kg, heating value, net 26.434 MJ, water content 0, water in wet mass 0 kg, wet mass 1 kg

## Inputs from technosphere
- acetone, liquid: -0.256357, -0.798539 kg (2 suppliers, which the file names only by identifier); sum of these -1.0549 kg; lognormal variance with pedigree 0.0173, pedigree (2,5,1,3,3)
  Stoichiometric by-product.
  production volume
    Calculated from production volume of reference product using the relative outputs.
  properties: carbon content, fossil 0.62069, dry mass 1 kg, heating value, net 31.32 MJ, price 0.437564 EUR2005, wet mass 1 kg
- benzene: 0.958779 kg; lognormal variance with pedigree 0.0173, pedigree (2,5,1,3,3)
  Calculated value based on stoichiometric calculations and literature data. For more information on the calculations refer to the sampling procedure.
  properties: carbon content, fossil 0.923077, dry mass 1 kg, heating value, net 42.5 MJ, wet mass 1 kg
- chemical factory, organics: 4e-10 unit; lognormal variance with pedigree 0.3432, pedigree (2,4,1,4,4)
  Calculated based on literature data published by the industry. For this activity, no information was readily available concerning infrastructure and land-use. Therefore, the infrastructure is estimated based on data from two chemical factories, the BASF site of Ludwigshafen and the chemical factory in Gendorf (which are both located in Germany), which produce a wide range of chemical substances. Based on this data, the following assumptions are made: the built area amounts to about 4.2 ha, the plant has an average output of 50'000 t/a and a lifespan of fifty years. The estimated infrastructure amount is therefore 4.00 E-10 units per kg of produced chemical.
  References:
  Althaus H.-J., Chudacoff M., Hischier R., Jungbluth N., Osses M. and Primas A. (2007) Life Cycle Inventories of Chemicals. ecoinvent report No. 8, v2.0. EMPA Dübendorf, Swiss Centre for Life Cycle Inventories, Dübendorf, CH.
  Gendorf (2000) Umwelterklärung 2000, Werk Gendorf. Werk Gendorf, Burgkirchen.
- electricity, medium voltage: 0.5 kWh; lognormal variance with pedigree 0.0438, pedigree (2,4,1,4,4)
  Literature value. As reported by Thebeeapelo (2002).
- heat, district or industrial, natural gas: 24.15 MJ; lognormal variance with pedigree 0.0438, pedigree (2,4,1,4,4)
  Literature value. As reported by Thebeeapelo (2002). Assumed to be natural gas.
  properties: heating value, net 1 MJ
- nitrogen, liquid: 0.018435, 0.018435 kg (2 suppliers, which the file names only by identifier); sum of these 0.03687 kg; lognormal variance with pedigree 0.0438, pedigree (2,4,1,4,4)
  Literature value. As reported by Thebeeapelo (2002). Report as nitrogen volume, density used 1.229 kg/Nm3.
  properties: dry mass 1 kg, wet mass 1 kg
- oxygen, liquid: 0.531909, 0.14595 kg (2 suppliers, which the file names only by identifier); sum of these 0.677859 kg; lognormal variance with pedigree 0.0173, pedigree (2,5,1,3,3)
  (same comment as for benzene)
  properties: dry mass 1 kg, wet mass 1 kg
- propylene: 0.447735, 0.447735, 0.139014 kg (3 suppliers, which the file names only by identifier); sum of these 1.03448 kg; lognormal variance with pedigree 0.0173, pedigree (2,5,1,3,3)
  (same comment as for benzene)
  properties: carbon content, fossil 0.857143, dry mass 1 kg, heating value, net 43.22 MJ, wet mass 1 kg
- steam, in chemical industry: 17.0023, 2.99772 kg (2 suppliers, which the file names only by identifier); sum of these 20 kg; lognormal variance with pedigree 0.0438, pedigree (2,4,1,4,4)
  Literature value. As reported by Thebeeapelo (2002).
  properties: dry mass 1 kg, wet mass 1 kg
- sulfuric acid: 0.000194203, 0.000805797 kg (2 suppliers, which the file names only by identifier); sum of these 0.001 kg; lognormal variance with pedigree 0.0173, pedigree (2,5,1,3,3)
  (same comment as for benzene)
  properties: dry mass 1 kg, wet mass 1 kg
- tap water: 0.136269 kg; lognormal variance with pedigree 0.0438, pedigree (2,4,1,4,4)
  Literature value. As reported by Thebeeapelo (2002). Split of water input sources based on literature data published by the GENDORF Chemical Park. The factory produced an average of 2462760 tonnes of chemical substances (including intermediates) per year in the years 2015-2019.
  properties: carbon content, fossil 0.00178991, dry mass 0.000337476 kg, water content 2962.17, wet mass 1 kg
  note on carbon content, fossil: Bicarbonate content is 2.93 mol/m3. CO2 content is 0.1 mol/m3 (ecoinvent v2.2 report 8, Tab 93.1).
- wastewater, average: -2.64069e-6, -3.93185e-8, -1.10433e-5, -6.63644e-8 m3 (4 suppliers, which the file names only by identifier); sum of these -1.37897e-5 m3; lognormal variance with pedigree 0.0438, pedigree (2,4,1,4,4)
  Literature value. As reported by Thebeeapelo (2002). Split of water output sources based on literature data published by the GENDORF Chemical Park. The factory produced an average of 2462760 tonnes of chemical substances (including intermediates) per year in the years 2015-2019.
  production volume
    Calculated from production volume of reference product using the relative outputs.
  properties: carbon content, non-fossil 0.194039, dry mass 0.346837 kg, water content 2882.2, wet mass 1000 kg
  note on carbon content, non-fossil: 0.0673 kg TOC/m3 (Tab A.17, ecoinvent v2.2 report 13_I). TOC was considered as Total Carbon.

## Inputs from nature
- Water, cooling, unspecified natural origin [natural resource, in water]: 0.0890715 m3; lognormal variance with pedigree 0.0438, pedigree (2,4,1,4,4)
  (same comment as for tap water)
- Water, river [natural resource, in water]: 0.00584703 m3; lognormal variance with pedigree 0.0438, pedigree (2,4,1,4,4)
  (same comment as for tap water)
- Water, well, in ground [natural resource, in water]: 0.00494517 m3; lognormal variance with pedigree 0.0438, pedigree (2,4,1,4,4)
  (same comment as for tap water)

## Emissions to nature
- Acetone [air, unspecified]: 0.001975 kg; lognormal variance with pedigree 0.0567, pedigree (2,5,1,3,3)
  Calculated losses, based on the boiling point of a chemical, to water or to air. In addition, unreacted chemicals are assumed to go to wastewater treatment, which has a conversion rate in biological treatment of 95% of carbon into carbon dioxide. The remaining 5% are released as emissions to water.
- Benzene [air, unspecified]: 0.00343106 kg; lognormal variance with pedigree 0.0567, pedigree (2,5,1,3,3)
  (same comment as for Acetone)
- Carbon dioxide, fossil [air, unspecified]: 1.57548 kg; lognormal variance with pedigree 0.0567, pedigree (2,5,1,3,3)
  Calculated value. The BOD, COD, TOC and BOD5 are calculated based on the amount and type of emissions released to water in the same activity.
- Nitrogen [air, unspecified]: 0.03687 kg; lognormal variance with pedigree 0.0832, pedigree (2,4,1,4,4)
  Calculated value. The amount of nitrogen released to air is equal to the amount of nitrogen entering the activity.
- Oxygen [air, unspecified]: 0.0033893 kg; lognormal variance with pedigree 0.0567, pedigree (2,5,1,3,3)
  (same comment as for Acetone)
- Propene [air, unspecified]: 0.00517242 kg; lognormal variance with pedigree 0.0567, pedigree (2,5,1,3,3)
  (same comment as for Acetone)
- Water [air, unspecified]: 0.00890247 m3; lognormal variance with pedigree 0.0832, pedigree (2,4,1,4,4)
  (same comment as for wastewater, average)
- BOD5, Biological Oxygen Demand [water, unspecified]: 0.0782447 kg; lognormal variance with pedigree 0.0567, pedigree (2,5,1,3,3)
  (same comment as for Carbon dioxide, fossil)
- COD, Chemical Oxygen Demand [water, unspecified]: 0.0782447 kg; lognormal variance with pedigree 0.0567, pedigree (2,5,1,3,3)
  Calculated based on the carbon content of unreacted chemical substances. The unreacted chemicals are assumed to go to wastewater treatment, which has a conversion rate in biological treatment of 95% of carbon into carbon dioxide. The remaining 5% are released as emissions to water, unspecified.
- DOC, Dissolved Organic Carbon [water, unspecified]: 0.0226095 kg; lognormal variance with pedigree 0.0567, pedigree (2,5,1,3,3)
  (same comment as for Carbon dioxide, fossil)
- TOC, Total Organic Carbon [water, unspecified]: 0.0226095 kg; lognormal variance with pedigree 0.0567, pedigree (2,5,1,3,3)
  (same comment as for Carbon dioxide, fossil)
- Water [water, unspecified]: 0.0910837 m3; lognormal variance with pedigree 0.0832, pedigree (2,4,1,4,4)
  Literature value. As reported by Thebeeapelo (2002). Split of water output sources based on literature data published by the GENDORF Chemical Park. The factory produced an average of 2462760 tonnes of chemical substances (including intermediates) per year in the years 2015-2019.
  This value includes process emissions.

## Sampling procedure
Literature data and stoichiometric calculation. This inventory is partially based on a generic model of the production of chemicals. The data generated by this model have been improved with compound-specific data when available.
The model of the production of chemicals is using specific industry or literature data wherever possible and more generic data on chemical production processes to fill compound-specific data gaps when necessary. The basic principles of the model have been published in literature (Hischier, 2005). The model has been updated and extended with newly available data from the chemical industry.
In the model, unreacted fractions are treated in a waste treatment process, and emissions reported are after a waste treatment process that is included in the scope of this dataset. For volatile reactants, a small level of evaporation is assumed. Solvents and catalysts are mostly recycled in closed-loop systems within the scope of the dataset and reported flows are for losses from this system.
The main source of information for the values for heat, electricity, water (process and cooling), nitrogen, chemical factory is industry data from the GENDORF Chemical Park. The values are a 5-year average of data from 2015 to 2019 published by the GENDORF Chemical Park, which is based in Germany and produced an average of 2462760 tonnes of chemical substances in the years 2015-2019.

Reference(s):
Hischier, R. (2005) Establishing Life Cycle Inventories of Chemicals Based on Differing Data Availability (9 pp). The International Journal of Life Cycle Assessment, Volume 10, Issue 1, pp 59–67. 10.1065/lca2004.10.181.7
Chemiepark GENDORF, Umwelterklärung 2016, https://www.gendorf.de/Nachbarn/Umweltschutz/Industrie%20und%20Nachhaltigkeit
Chemiepark GENDORF, Umwelterklärung 2017, https://www.gendorf.de/Nachbarn/Umweltschutz/Industrie%20und%20Nachhaltigkeit
Chemiepark GENDORF, Umwelterklärung 2020, https://www.gendorf.de/Nachbarn/Umweltschutz/Industrie%20und%20Nachhaltigkeit
Schmiedel K.W., Decker D. (2011): Resorcinol, Ullmann's Encyclopedia of Industrial Chemistry, Wiley-VCH.
ECHA: Resorcinol, available here: https://echa.europa.eu/substance-information/-/substanceinfo/100.003.260, last accessed 20-07-2022.
