# coking

Dataset: EcoSpold 2, unit process
Geography: RoW
Time period: 1980-01-01 to 2022-12-31
Technology level: current
Classification: ISIC rev.4 ecoinvent: 1910:Manufacture of coke oven products
Classification: EcoSpold01Categories: hard coal/fuels
Tags: ConvertedDataset
Scenario: Business-as-Usual
System model: Substitution, consequential, long-term
Generated by: Christian Bauer
Published in: Röder, A. 2007
Database: ecoinvent
isCopyrightProtected: true

## General comment
The multioutput-prozess "hard coal, in coke plant" delivers the coproducts "coke oven gas, at plant", "tar, at coke plant", and "benzene, at coke plant". 79.8% of the total energy and material input as well as emission from the coke plant are allocated to coke production, 15% to coke oven gas production, 4.1% to tar production, and 1.1% to benzene production. This allocation has been performed considering the energy content of the coke compared to all other byproducts. Due to lack of information, the allocation factors are the same as for Germany. Hypothesizing that coke production worldwide is mostly based on the byproduct process, this is described here. Emission data are maximum for US plants. Energy and material consumption as well as water emission and solid waste are taken from the DE module. The assumed uncertainty factors should somewhat frame the incomplete information about coke making outside Europe and USA. This module shall be considered only as a first approximation for the purpose to serve metal manufacturing processes within ecoinvent. In some countries coke making might exhibit worse environmental performance. Hence, when country-specific LCA studies will need to address coke making directly or indirectly, a specific assessment of local conditions should be pursued.
[This dataset was already contained in the ecoinvent database version 2. It was not individually updated during the transfer to ecoinvent version 3. Life Cycle Impact Assessment results may still have changed, as they are affected by changes in the supply chain, i.e. in other datasets. This dataset was generated following the ecoinvent quality guidelines for version 2. It may have been subject to central changes described in the ecoinvent version 3 change report (http://www.ecoinvent.org/database/ecoinvent-version-3/reports-of-changes/), and the results of the central updates were reviewed extensively. The changes added e.g. consistent water flows and other information throughout the database. The documentation of this dataset can be found in the ecoinvent reports of version 2, which are still available via the ecoinvent website. The change report linked above covers all central changes that were made during the conversion process.]

## Included activities end
The reference process has been assumed to be the byproduct coke production, used in almost all US coke plants in 1998. The coke making has been considered as a black box. The energy necessary for the process is assumed to be provided by part of the input coal and by some electricity. The module includes chemicals used for operation and the associated transport requirements. The transport of coal are considered to be negligible, because the plant is assumed to be mine-mouth. The module also includes the total emissions to air and water from the entire plant. Coke oven gas, tar, and benzene are byproducts of coking.

## Geography
The estimation of the energy input is made on the basis of data for all coke plants in West Germany in 1991. Emissions are maximum values reported by USEPA for byproduct coke production in the 1990s. This module should be regarded as a first approximation of average world conditions.

## Technology
Average in Germany and USA in 1980s and 1990s.

## Parameters
- fraction, cooling water, cooling pond system, to air: 0.032 dimensionless; name fraction_CW_CP_to_air; lognormal variance with pedigree 0.0413, pedigree (2,3,1,3,1)
  Calculated based on literature value (Scown, C.D., 2011, Water Footprint of U.S. Transportation Fuels and supplying information of the article) (Vionnet, S., Quantis Water Database - Technical Report, 2012).
- fraction, cooling water, once-through system, to air: 0.004 dimensionless; name fraction_CW_OT_to_air; lognormal variance with pedigree 0.0413, pedigree (2,3,1,3,1)
  (same comment as for fraction, cooling water, cooling pond system, to air)
- fraction, cooling water, recirculating system, to air: 0.771 dimensionless; name fraction_CW_R_to_air; lognormal variance with pedigree 0.0413, pedigree (2,3,1,3,1)
  (same comment as for fraction, cooling water, cooling pond system, to air)
- fraction, cooling water, to air: 0.3875 dimensionless; name fraction_CW_to_air; = (0.5*fraction_CW_OT_to_air)+(0.5*fraction_CW_R_to_air); lognormal variance with pedigree 0.092025, pedigree (4,4,3,2,4)
  Calculated value based on literature value (see comments of the other parametres present in this dataset) and expert opinion. In the case when no industry/literature data are available about the type of cooling or directly fraction, cooling water, to air specific for the process a default assumption is applied. It is assumed that the once-through cooling system is used in 50% of all cases and recirculating system is used in another 50% of all cases.
- fraction, water, decarbonised, to air: 0.3875 dimensionless; name fraction_WDC_to_air; = fraction_CW_to_air; lognormal variance with pedigree 0.092025, pedigree (4,4,3,2,4)
  Calculated value. See comments in the other parametres present in this dataset. Decarbonised water is considered to be always used as cooling water, thus cooling water fractions to air are applied to all carbonised water input flows to calculate the amount of water consumed in the processes.

## Reference product
- coke: 1 MJ; By-product classification allocatable product; CPC 33100: Coke and semi-coke of coal, of lignite or of peat; retort carbon
  EcoSpold01Location=GLO
  production volume 1.60919e13 MJ
    Source for mass: http://www.worldcoal.org/resources/coal-statistics/coal-steel-statistics/ visited 2010-06-30; 28.6 MJ/kg
  property carbon content, fossil 0.869149
    81.7% C and 6% water in wet mass (ecoinvent v2.1 report 6_VI Table 7.1)
  property price 0.006 EUR2005
    Temporary price data. Calculated as 90% of purchasers price based on: 2004 prices calculated from Import/Export data (total trades (USD) divided by total weight (kg) in EU27, USA, China, Japan and India) from UN Trade data statistics (http://data.un.org/Explorer.aspx, Accessed 6 July 2010). Data from UN trade are in mass unit. Calorific value (lower) of 28.6 MJ/kg has been used to convert to MJ.
  properties: EcoSpold01Allocation_undefined_1 79.8, EcoSpold01Allocation_undefined_10 79.8, EcoSpold01Allocation_undefined_11 79.8, EcoSpold01Allocation_undefined_12 79.8, EcoSpold01Allocation_undefined_13 79.8, EcoSpold01Allocation_undefined_14 79.8, EcoSpold01Allocation_undefined_15 79.8, EcoSpold01Allocation_undefined_16 79.8, EcoSpold01Allocation_undefined_17 79.8, EcoSpold01Allocation_undefined_18 79.8, EcoSpold01Allocation_undefined_19 79.8, EcoSpold01Allocation_undefined_2 79.8, EcoSpold01Allocation_undefined_20 79.8, EcoSpold01Allocation_undefined_21 79.8, EcoSpold01Allocation_undefined_22 79.8, EcoSpold01Allocation_undefined_23 79.8, EcoSpold01Allocation_undefined_24 79.8, EcoSpold01Allocation_undefined_25 79.8, EcoSpold01Allocation_undefined_26 79.8, EcoSpold01Allocation_undefined_27 79.8, EcoSpold01Allocation_undefined_28 79.8, EcoSpold01Allocation_undefined_29 79.8, EcoSpold01Allocation_undefined_3 79.8, EcoSpold01Allocation_undefined_30 79.8, EcoSpold01Allocation_undefined_31 79.8, EcoSpold01Allocation_undefined_32 79.8, EcoSpold01Allocation_undefined_33 79.8, EcoSpold01Allocation_undefined_34 79.8, EcoSpold01Allocation_undefined_35 79.8, EcoSpold01Allocation_undefined_36 79.8, EcoSpold01Allocation_undefined_37 79.8, EcoSpold01Allocation_undefined_38 79.8, EcoSpold01Allocation_undefined_39 79.8, EcoSpold01Allocation_undefined_4 79.8, EcoSpold01Allocation_undefined_40 79.8, EcoSpold01Allocation_undefined_41 79.8, EcoSpold01Allocation_undefined_42 79.8, EcoSpold01Allocation_undefined_43 79.8, EcoSpold01Allocation_undefined_44 79.8, EcoSpold01Allocation_undefined_45 79.8, EcoSpold01Allocation_undefined_46 79.8, EcoSpold01Allocation_undefined_47 79.8, EcoSpold01Allocation_undefined_48 79.8, EcoSpold01Allocation_undefined_49 79.8, EcoSpold01Allocation_undefined_5 79.8, EcoSpold01Allocation_undefined_50 79.8, EcoSpold01Allocation_undefined_51 79.8, EcoSpold01Allocation_undefined_52 79.8, EcoSpold01Allocation_undefined_53 79.8, EcoSpold01Allocation_undefined_54 79.8, EcoSpold01Allocation_undefined_55 79.8, EcoSpold01Allocation_undefined_56 79.8, EcoSpold01Allocation_undefined_57 79.8, EcoSpold01Allocation_undefined_58 100, EcoSpold01Allocation_undefined_6 79.8, EcoSpold01Allocation_undefined_62 79.7999, EcoSpold01Allocation_undefined_63 79.7999, EcoSpold01Allocation_undefined_7 79.8, EcoSpold01Allocation_undefined_8 79.8, EcoSpold01Allocation_undefined_9 79.8, carbon allocation 0.0285664 kg, carbon content 0.869149, carbon content, non-fossil 0, dry mass 0.0328671 kg, heating value, net 28.6 MJ, water content 0.0638298, water in wet mass 0.0020979 kg, wet mass 0.034965 kg

## Inputs from technosphere
- benzene: -0.000346957 kg
  EcoSpold01Location=GLO
  production volume
    Calculated as 1/79 of mass of coke
  properties: EcoSpold01Allocation_undefined_1 1.1, EcoSpold01Allocation_undefined_10 1.1, EcoSpold01Allocation_undefined_11 1.1, EcoSpold01Allocation_undefined_12 1.1, EcoSpold01Allocation_undefined_13 1.1, EcoSpold01Allocation_undefined_14 1.1, EcoSpold01Allocation_undefined_15 1.1, EcoSpold01Allocation_undefined_16 1.1, EcoSpold01Allocation_undefined_17 1.1, EcoSpold01Allocation_undefined_18 1.1, EcoSpold01Allocation_undefined_61 100, heating value, net 42.5 MJ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
- coal gas: -0.190435 MJ
  EcoSpold01Location=GLO
  production volume
    Calculated relative to coke output with factor 15/79.8
  properties: EcoSpold01Allocation_undefined_1 15, EcoSpold01Allocation_undefined_10 15, EcoSpold01Allocation_undefined_11 15, EcoSpold01Allocation_undefined_12 15, EcoSpold01Allocation_undefined_13 15, EcoSpold01Allocation_undefined_14 15, EcoSpold01Allocation_undefined_15 15, EcoSpold01Allocation_undefined_16 15, EcoSpold01Allocation_undefined_17 15, EcoSpold01Allocation_undefined_59 100, EcoSpold01Allocation_undefined_62 15.0001, EcoSpold01Allocation_undefined_63 15.0001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
- coal tar: -0.0013913 kg
  EcoSpold01Location=GLO
  production volume
    Calculated as 3/79 of mass of coke
  properties: EcoSpold01Allocation_undefined_1 4.1, EcoSpold01Allocation_undefined_10 4.1, EcoSpold01Allocation_undefined_11 4.1, EcoSpold01Allocation_undefined_12 4.1, EcoSpold01Allocation_undefined_13 4.1, EcoSpold01Allocation_undefined_14 4.1, EcoSpold01Allocation_undefined_15 4.1, EcoSpold01Allocation_undefined_16 4.1, EcoSpold01Allocation_undefined_17 4.1, EcoSpold01Allocation_undefined_18 4.1, EcoSpold01Allocation_undefined_60 100, heating value, net 28 MJ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
  note on heating value, net: Literature value, Source: IPCC 2006, 2006 IPCC Guidelines for National Greenhouse Gas Inventories, Prepared by the National Greenhouse Gas Inventories Programme, Eggleston H.S., Buendia L., Miwa K., Ngara T. and Tanabe K. (eds). Published: IGES, Japan
- electricity, medium voltage: 0.000183044, 1.14828e-6, 3.3737e-7, 8.94705e-7, 2.98501e-6, 0.000126811, 6.2919e-6, 3.68133e-6, 6.52671e-7, 6.31643e-7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 kWh (46 suppliers, which the file names only by identifier); sum of these 0.00212609 kWh; lognormal variance with pedigree 0.34, pedigree (1,1,5,1,1)
  own assumption
  EcoSpold01Location=UCTE
- hard coal: 0.00377218, 0.00384942, 0.00562388, 0.00831913, 0.00626967, 0.00163701, 0.00293697, 0.000895111, 0.0266966 kg (9 suppliers, which the file names only by identifier); sum of these 0.06 kg; lognormal variance with pedigree 0.04, pedigree (1,1,5,1,1)
  EcoSpold01Location=UCTE
  standard for ressources
  properties: carbon content, fossil 0.845, dry mass 0.94 kg, heating value, net 27.91 MJ, water content 0.0638298, wet mass 1 kg
  note on carbon content, fossil: C content 75-94% (specified in Tab 1.1, report 6, part VI). A mean content of 0.845 kg C/ kg dry hard coal was considered
  note on heating value, net: Based on the Characterization factor of Hard coal in the CED method
- hard coal coke factory: 7.3913e-13 unit; lognormal variance with pedigree 0.08, pedigree (1,1,5,1,1)
  own assumption
  EcoSpold01Location=RER
- iron sulfate: 3.17391e-6 kg; lognormal variance with pedigree 0.34, pedigree (1,1,5,1,1)
  EcoSpold01Location=RER
  own assumption
  properties: dry mass 1 kg, wet mass 1 kg
- phosphoric acid, fertiliser grade, without water, in 70% solution state: 6.34783e-6 kg; lognormal variance with pedigree 0.34, pedigree (1,1,5,1,1)
  own assumption
  EcoSpold01Location=GLO
  properties: dry mass 1 kg, wet mass 1 kg
- sodium hydroxide, without water, in 50% solution state: 8.86957e-5 kg; lognormal variance with pedigree 0.34, pedigree (1,1,5,1,1)
  own assumption
  EcoSpold01Location=RER
  properties: dry mass 1 kg, heating value, net 3.03 MJ, wet mass 1 kg
- water, decarbonised: 0.0127884, 0.00162849, 0.0201988, 0.000114282, 0.0020701, 1.98292e-6, 0.00121859, 0.000629555, 0.0237951, 0.00379342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 kg (12 suppliers, which the file names only by identifier); sum of these 0.0695652 kg; lognormal variance with pedigree 0.34, pedigree (1,1,5,1,1)
  own assumption
  EcoSpold01Location=RER
  properties: wet mass 1 kg

## Emissions to nature
- Acetone [air, non-urban air or from high stacks]: 1.83913e-6 kg; lognormal variance with pedigree 0.34, pedigree (1,1,5,1,1)
  own assumption
- Acrolein [air, non-urban air or from high stacks]: 2.26957e-9 kg; lognormal variance with pedigree 0.34, pedigree (1,1,5,1,1)
  own assumption
- Ammonia [air, non-urban air or from high stacks]: 2.66522e-7 kg; lognormal variance with pedigree 1.37, pedigree (1,1,5,1,1)
  own assumption
- Antimony ion [air, non-urban air or from high stacks]: 3.12609e-11 kg; lognormal variance with pedigree 0.69, pedigree (1,1,5,1,1)
  own assumption
- Arsenic ion [air, non-urban air or from high stacks]: 8.56522e-10 kg; lognormal variance with pedigree 0.08, pedigree (1,1,5,1,1)
  own assumption
- Barium II [air, non-urban air or from high stacks]: 9.73913e-10 kg; lognormal variance with pedigree 0.69, pedigree (1,1,5,1,1)
  own assumption
- Benzene [air, non-urban air or from high stacks]: 4.69565e-5 kg; lognormal variance with pedigree 1.37, pedigree (1,1,5,1,1)
  own assumption
- Benzo(a)pyrene [air, non-urban air or from high stacks]: 3.39565e-7 kg; lognormal variance with pedigree 0.08, pedigree (1,1,5,1,1)
  own assumption
- Beryllium II [air, non-urban air or from high stacks]: 1.56087e-11 kg; lognormal variance with pedigree 0.69, pedigree (1,1,5,1,1)
  own assumption
- Cadmium II [air, non-urban air or from high stacks]: 1.2913e-11 kg; lognormal variance with pedigree 0.08, pedigree (1,1,5,1,1)
  own assumption
- Carbon dioxide, fossil [air, non-urban air or from high stacks]: 0.00695652 kg; lognormal variance with pedigree 0.05, pedigree (1,1,5,1,1)
  own assumption
- Carbon disulfide [air, non-urban air or from high stacks]: 4.06087e-8 kg; lognormal variance with pedigree 0.05, pedigree (1,1,5,1,1)
  own assumption
- Carbon monoxide, fossil [air, non-urban air or from high stacks]: 0.00073913 kg; lognormal variance with pedigree 0.34, pedigree (1,1,5,1,1)
  own assumption
- Chromium III [air, non-urban air or from high stacks]: 4.12609e-10 kg; lognormal variance with pedigree 0.69, pedigree (1,1,5,1,1)
  own assumption
- Cobalt II [air, non-urban air or from high stacks]: 1.18261e-10 kg; lognormal variance with pedigree 0.69, pedigree (1,1,5,1,1)
  own assumption
- Copper ion [air, non-urban air or from high stacks]: 5.13043e-10 kg; lognormal variance with pedigree 0.69, pedigree (1,1,5,1,1)
  own assumption
- Cyanide [air, non-urban air or from high stacks]: 1.42609e-7 kg; lognormal variance with pedigree 0.69, pedigree (1,1,5,1,1)
  own assumption
- Ethane [air, non-urban air or from high stacks]: 1.24348e-5 kg; lognormal variance with pedigree 0.69, pedigree (1,1,5,1,1)
  own assumption
- Ethanol [air, non-urban air or from high stacks]: 1.85652e-9 kg; lognormal variance with pedigree 0.69, pedigree (1,1,5,1,1)
  own assumption
- Lead II [air, non-urban air or from high stacks]: 1.31739e-9 kg; lognormal variance with pedigree 0.08, pedigree (1,1,5,1,1)
  own assumption
- Manganese II [air, non-urban air or from high stacks]: 7.17391e-10 kg; lognormal variance with pedigree 0.69, pedigree (1,1,5,1,1)
  own assumption
- Mercury II [air, non-urban air or from high stacks]: 1.56522e-11 kg; lognormal variance with pedigree 0.34, pedigree (1,1,5,1,1)
  own assumption
- Methane, chlorodifluoro-, HCFC-22 [air, non-urban air or from high stacks]: 1.42174e-7 kg; lognormal variance with pedigree 0.34, pedigree (1,1,5,1,1)
  own assumption
- Methane, fossil [air, non-urban air or from high stacks]: 0.000114348 kg; lognormal variance with pedigree 1.37, pedigree (1,1,5,1,1)
  own assumption
- Methanol [air, non-urban air or from high stacks]: 1.85652e-7 kg; lognormal variance with pedigree 0.69, pedigree (1,1,5,1,1)
  own assumption
- NMVOC, non-methane volatile organic compounds [air, non-urban air or from high stacks]: 0.000456522 kg; lognormal variance with pedigree 0.69, pedigree (1,1,5,1,1)
  own assumption
- Nickel II [air, non-urban air or from high stacks]: 9.30435e-10 kg; lognormal variance with pedigree 0.69, pedigree (1,1,5,1,1)
  own assumption
- Nitrogen oxides [air, non-urban air or from high stacks]: 3.68261e-5 kg; lognormal variance with pedigree 0.34, pedigree (1,1,5,1,1)
  own assumption
- PAH, polycyclic aromatic hydrocarbons [air, non-urban air or from high stacks]: 9.95652e-8 kg; lognormal variance with pedigree 0.69, pedigree (1,1,5,1,1)
  own assumption
- Particulate Matter, < 2.5 um [air, non-urban air or from high stacks]: 0.000107391 kg; lognormal variance with pedigree 0.34, pedigree (1,1,5,1,1)
  own assumption
- Particulate Matter, > 10 um [air, non-urban air or from high stacks]: 0.00018087 kg; lognormal variance with pedigree 0.34, pedigree (1,1,5,1,1)
  own assumption
- Particulate Matter, > 2.5 um and < 10um [air, non-urban air or from high stacks]: 4.91304e-5 kg; lognormal variance with pedigree 0.34, pedigree (1,1,5,1,1)
  own assumption
- Phenol, pentachloro- [air, non-urban air or from high stacks]: 1.49565e-7 kg; lognormal variance with pedigree 0.34, pedigree (1,1,5,1,1)
  own assumption
- Phosphorus [air, non-urban air or from high stacks]: 2e-9 kg; lognormal variance with pedigree 0.69, pedigree (1,1,5,1,1)
  own assumption
- Propane [air, non-urban air or from high stacks]: 1.24348e-7 kg; lognormal variance with pedigree 0.69, pedigree (1,1,5,1,1)
  own assumption
- Selenium IV [air, non-urban air or from high stacks]: 2.85652e-10 kg; lognormal variance with pedigree 0.69, pedigree (1,1,5,1,1)
  own assumption
- Silver I [air, non-urban air or from high stacks]: 5.65217e-12 kg; lognormal variance with pedigree 0.69, pedigree (1,1,5,1,1)
  own assumption
- Styrene [air, non-urban air or from high stacks]: 1.90435e-9 kg; lognormal variance with pedigree 0.69, pedigree (1,1,5,1,1)
  own assumption
- Sulfur dioxide [air, non-urban air or from high stacks]: 7.04348e-5 kg; lognormal variance with pedigree 0.34, pedigree (1,1,5,1,1)
  own assumption
- Thallium I [air, non-urban air or from high stacks]: 6.6087e-11 kg; lognormal variance with pedigree 0.69, pedigree (1,1,5,1,1)
  own assumption
- Toluene [air, non-urban air or from high stacks]: 1.47391e-7 kg; lognormal variance with pedigree 0.69, pedigree (1,1,5,1,1)
  own assumption
- Water [air, unspecified]: 2.69565e-5 m3; name water_to_air_unspecified; = (water_decarbonised_input/1000*fraction_WDC_to_air); lognormal variance with pedigree 0.0807, pedigree (2,2,5,1,1)
  Calculated value based on literature values and expert opinion. See comments in the parametres' comment field.
  property fraction, origin: fresh water 1; name fraction_origin_fresh_water
  property fraction, origin: salt water 0; name fraction_origin_salt_water
  property fraction, origin: unspecified 0; name fraction_origin_unspecified
- Zinc II [air, non-urban air or from high stacks]: 2.61739e-9 kg; lognormal variance with pedigree 0.69, pedigree (1,1,5,1,1)
  own assumption
- Ammonium [water, surface water]: 7.91304e-7 kg; lognormal variance with pedigree 0.34, pedigree (1,1,5,1,1)
  own assumption
- Chloride [water, surface water]: 6.17391e-5 kg; lognormal variance with pedigree 0.34, pedigree (1,1,5,1,1)
  own assumption
- Hydrogen sulfide [water, surface water]: 1.26957e-7 kg; lognormal variance with pedigree 0.34, pedigree (1,1,5,1,1)
  own assumption
- PAH, polycyclic aromatic hydrocarbons [water, surface water]: 9.52174e-10 kg; lognormal variance with pedigree 0.34, pedigree (1,1,5,1,1)
  own assumption
- Sodium I [water, surface water]: 3.96957e-5 kg; lognormal variance with pedigree 0.34, pedigree (1,1,5,1,1)
  own assumption
- Solids, inorganic [water, surface water]: 3.4913e-5 kg; lognormal variance with pedigree 0.34, pedigree (1,1,5,1,1)
  own assumption
- Water [water, unspecified]: 4.26087e-5 m3; name water_to_water_unspecified; = (water_decarbonised_input/1000)*(1-fraction_WDC_to_air); lognormal variance with pedigree 0.0807, pedigree (2,2,5,1,1)
  (same comment as for Water)
  property carbon content, fossil 0; name C_content_fossil
  property carbon content, non-fossil 0; name C_content_non_fossil
  property fraction, origin: fresh water 1; name fraction_origin_fresh_water_Ww
  property fraction, origin: salt water 0; name fraction_origin_salt_water_Ww
  property fraction, origin: unspecified 0; name fraction_origin_unspecified_Ww
  property water in wet mass 1000 kg; name WWM

## Sampling procedure
literature

## Extrapolations
see Geography/Text

## Review by Hans-Jörg Althaus 2003-07-04
passed
