# soybean beverage production

Dataset: EcoSpold 2, unit process
Geography: RoW
Time period: 2010-01-01 to 2022-12-31
Technology level: current
Classification: ISIC rev.4 ecoinvent: 1030:Processing and preserving of fruit and vegetables
Synonyms: soy milk; soybean milk
Scenario: Business-as-Usual
System model: Substitution, consequential, long-term
Generated by: Pierre-Olivier Roy
Database: ecoinvent
isCopyrightProtected: true

## General comment
This dataset represent the soybean beverage production following the ProSoya Inc. process; which is used by at least the Earth's Own Food Company Inc. This dataset is extrapolated from the Quebec dataset. Soybeans received at the facility are sampled and analyzed for moisture content, foreign matter, and damaged seeds. The soybeans which are not up to specifications are eliminated. Soybeans are not dehulled; they are first soaked and remain there for a certain period of time (approximately 24 hours). The soaking water is continuously removed as fresh water enters the vessels. The soybeans are then grounded under airless condition. The resulting slurry is then centrifuged to obtain a soy base at 5% protein. Separated from a moist solid co-product, the okara is valorized as animal feed. The soy base is then sent to a vacuum deodorization tank where the volatile off-flavors are removed, diluted down to 3.25% protein content with filtered water, and submitted to an Ultra High Temperature (UHT) sterilization process, before aseptic packaging.

## Included activities start
From the arrival of beans

## Included activities end
This activity ends with the soy beverage production. The dataset includestthe production of 5% protein soy base, dilution of soy base into a soy beverage @3.25% protein and UHT sterilisation. The dataset doesn't include refregiration of the soy beverage, infrastructures and cleaning processes. Refrigerated storage down the supply chain is specific to pasteurized soybean beverage. While the latter is also marketed, it seems to have a smaller market share than the long conservation UHT soy beverage.

## Geography
This dataset was extrapolated from the Québec dataset

## Time period
Extrapolated from the Quebec dataset. Collected data for Quebec processing industries in 2012-13 period while soybean production values were taken from statistics in 2010

## Parameters
- electricity input: 0.1669 kWh; name electricity; = 0.1+0.0573+0.0096; lognormal variance with pedigree 0.0038, pedigree (2,3,1,5,1)
  kWh/kg soybean; electricity from soy base production, homogenizing and UHT sterilization; extrapolated from the Québec dataset
- enthalpy: 2675.43 kJ/kg
  kJ/kg; required for the calculation of heat loss
- fraction, process water, to air: 0.15 dimensionless; name fraction_PW_to_air; lognormal variance with pedigree 0.092025, pedigree (4,4,3,2,4)
  Literature value. In case when no industry/process specific data are available, default evaporation fraction value is used. This value is 15% and is based on literature (Statistics Canada, 2007 & Shaffer, K.H., 2008, Consumptive water use in the Great Lakes Basin, USGS & Shiklomanov, 2003, World Water Resources at the Beginning of the 21st Century) and has been approved by an expert.
  This literature value also corresponds with direct measurements of the amount of tap water entering the activity and the amount of wastewater leaving the activity.
- fraction, tap water, to air: 0.15 dimensionless; name fraction_TW_to_air; = fraction_PW_to_air; lognormal variance with pedigree 0.092025, pedigree (4,4,3,2,4)
  Calculated value. See comment in the other parametres present in this dataset. Tap water is considered to be always used as process water, thus process water fractions to air are applied to all tap water input flows to calculate the amount of water consumed in the processes.
- mass discarded soybeans: 0.02 kg; name m_discarded; lognormal variance with pedigree 0.012, pedigree (2,3,2,5,3)
  kg/kg soybean; discarded soybeans based on evaluation from Daalgard et al. 2008 ; extrapolated from the Québec dataset
  Dalgaard, R.; Schmidt, J.; Halberg, N.; Christensen, P.; Thrane, M.; Pengue. W. A., 2008. LCA of Soybean Meal. International Journal of Life Cycle Assessment, 13, (3), 240-254
- mass okara: 1.75 kg; name okara; lognormal variance with pedigree 0.0038, pedigree (2,3,1,5,1)
  kg/kg soybean; okara is a by product of the soy base production; extrapolated from the Québec dataset
- mass soybean: 1 kg; name soybean; lognormal variance with pedigree 0.0038, pedigree (2,3,1,5,1)
  kg; the reference for the mass balance calculation: 1 kg of soybean
- mass steam: 2.3968 kg; name steam; = 1.25+1.1468; lognormal variance with pedigree 0.0092, pedigree (2,3,1,5,1)
  kg; steam from soybase production and UHT sterilization; extrapolated from the Québec dataset
- mass wastewater: 4.1268 kg; name wastewater; = soybean+steam-m_discarded-okara+water+water_dilution-beverage; lognormal variance with pedigree 0.0038, pedigree (2,3,1,5,1)
  kg/kg soybean; from total mass balance calculation; extrapolated from the Québec dataset
- mass water (dilution): 2.65 kg; name water_dilution; lognormal variance with pedigree 0.0038, pedigree (2,3,1,5,1)
  kg/kg soybean; water for the dilution process to decrease the protein content from 5% to the soybean beverage protein content; extrapolated from the Québec dataset
- mass water (process): 7.5 kg; name water; lognormal variance with pedigree 0.0038, pedigree (2,3,1,5,1)
  kg/kg soybean; water requirements for the soy base production (5% protein content); extrapolated from the Québec dataset
- soybeverage: 7.65 l; name beverage; lognormal variance with pedigree 0.0038, pedigree (2,3,1,5,1)
  L/kg soybean; L/kg soybean; the result of the mass balance calculation. 7.65L (at the given protein content) of soybean beverage are produced from 1 kg of soybeans. Extrapolated from the Québec dataset

## Reference product
- soybean beverage: 1 l; name bev; = beverage/beverage; source Pro Soya 2013; By-product classification allocatable product; CPC 24: Beverages
  see parameter
  production volume 6.01914e10 l
    The quantity of worldwide soybean beverage from organic soybeans. The calculation is based on the total worldwide quantity of available soybeans according to FAO (262352402 MT) ( statistics from 2011: http://faostat.fao.org/site/339/default.aspx) . The SoyAutralia ltd (2011 http://www.australianoilseeds.com/__data/assets/pdf_file/0005/8177/Industry__and__Market_Review_2011.pdf)approximately) then estimated that approximately 3% of the world soybeans production was intended for soybean beverages. Accordingly, the worldwide production of soybean beverage is equal to the 3% of the worldwide soybean production multiplied by the quantity of beverage obtained for 1 kg of soybeans.
  property price 0.0545 EUR2005
    Calculated based on literature values and estimates. The price of soybeans in 2005 was 0.23 Euro/kg. Import Quantity worldwide; 66869432 tonnes, Import Value; 18967764000 USD (FAOSTAT). Including the price of all the other inputs from technosphare. Resulting value multiplied by 1.5 to account for the treatment of wastewater and other expences which should be included in the basic price.
  properties: carbon allocation 0.0536274 kg, carbon content 0.7877, carbon content, fossil 0, carbon content, non-fossil 0.7877, digestable energy content 2.26 MJ/kg, dry mass 0.068081 kg, oil/fat content 0.017, protein content 0.0327, water content 13.688, water in wet mass 0.93192 kg, wet mass 1 kg

## Inputs from technosphere
- biowaste: -0.00259155, -2.28246e-5 kg (2 suppliers, which the file names only by identifier); sum of these -0.00261438 kg; = m_discarded/beverage; source Dalgaard, R. 2008
  see parameter
  production volume
    Calculated from production volume of reference product using the relative outputs.
  properties: carbon content, non-fossil 0.1624, dry mass 0.4 kg, heating value, net 4.29 MJ, water content 1.5, wet mass 1 kg
  note on heating value, net: Value taken from the general comment of the treatment dataset.
- electricity, medium voltage: 0.00187262, 6.95359e-5, 0.000194443, 0.00191244, 0.0154503, 7.00642e-5, 0.000346765, 0.00101061, 0.000890189 kWh (9 suppliers, which the file names only by identifier); sum of these 0.021817 kWh; = electricity/beverage; source Pro Soya 2013; lognormal variance with pedigree 0.008, pedigree (1,1,4,1,1)
  see parameter
  Uncertainty: Calculated variable. Uncertainty will be determined from propagation of uncertainty factors of underlying variables. Uncertainty of actual relation between variables not accounted at this time, although this could be included in a future update
- protein feed, 100% crude: -0.00732026 kg; name protein; = okara/beverage*0.032; source Pro Soya 2013
  see parameter; this is a proxy for okara since okara is used as a protein source for animal feeds
  3.2% is the amount of crude protein in okara.
  production volume
    Calculated from production volume of reference product using the relative outputs.
  properties: carbon content, non-fossil 0.0978, digestable energy content 3.22 MJ/kg, dry mass 0.184 kg, price 0.424 EUR2005, protein content 1, wet mass 1 kg
- soybean, organic: 0.130719 kg; = soybean/beverage; source Pro Soya 2013; lognormal variance with pedigree 0.008, pedigree (1,1,4,1,1)
  (same comment as for electricity, medium voltage)
  properties: carbon content, non-fossil 0.52451, dry mass 0.86 kg, oil/fat content 0.215, protein content 0.4, wet mass 1 kg
- steam, in chemical industry: 0.266347, 0.0469603 kg (2 suppliers, which the file names only by identifier); sum of these 0.313307 kg; = steam/beverage; source Pro Soya 2013; lognormal variance with pedigree 0.008, pedigree (1,1,4,1,1)
  (same comment as for electricity, medium voltage)
  properties: wet mass 1 kg
- tap water: 0.0281853, 0.14168, 0.0525924, 0.0184892, 0.170957, 0.710722, 0.204172 kg (7 suppliers, which the file names only by identifier); sum of these 1.3268 kg; = (water+ water_dilution)/beverage; source Pro Soya 2013; lognormal variance with pedigree 0.008, pedigree (1,1,4,1,1)
  (same comment as for electricity, medium voltage)
  properties: dry mass 0.000337476 kg, wet mass 1 kg
- wastewater, average: -0.000103599, -0.000433249, -2.60359e-6 m3 (3 suppliers, which the file names only by identifier); sum of these -0.000539451 m3; = wastewater/1000/beverage; source Pro Soya 2013
  see parameter
  production volume
    Calculated from production volume of reference product using the relative outputs.
  properties: carbon content, non-fossil 0.194039, dry mass 0.346837 kg, wet mass 1000 kg
  note on carbon content, non-fossil: 0.0673 kg TOC/m3 (Tab A.17, ecoinvent v2.2 report 13_I). TOC was considered as Total Carbon.

## Emissions to nature
- Water [air, unspecified]: 0.00019902 m3; name water_to_air_unspecified; = (tap_water_input/1000)* fraction_TW_to_air
  Calculated value based on literature values and expert opinion. See comments in the parametres' comment field.

## Sampling procedure
Collected data for Quebec industries for soybean

## Extrapolations
This dataset was extrapolated from the Québec dataset; uncertainty has been adjusted accordingly
