# treatment of wastewater from vegetable oil refinery, wastewater treatment

Dataset: EcoSpold 2, unit process
Geography: GLO
Time period: 2010-01-01 to 2022-12-31
Technology level: current
Classification: ISIC rev.4 ecoinvent: 3700:Sewerage
Scenario: Business-as-Usual
System model: Substitution, consequential, long-term
Generated by: Nikolia Stoikou
Database: ecoinvent
isCopyrightProtected: true

## General comment
This dataset represents the treatment of a wastewater, generated from an ordinary transforming activity. Purification in wastewater treatment of 'wastewater from vegetable oil refinery'. Recommended use of this dataset: to be used for wastewaters, generated from ordinary transforming activities, of equal or similar composition. The wastewater has a content of TOC: 10.783 kg/m3, COD: 42.03899 kg/m3 and BOD: 20.33224 kg/m3. TOC is equal to C present in the wastewater, COD is calculated as TOC/0.2565 and BOD is calculated as COD/0.53034. Detailed elemental composition can be found in the properties of the wastewater treated. Share of biogenic carbon in the sludge: 100%.

## Included activities start
The activity starts with the wastewater being available at the gate of the treatment facility. Collection and transportation of the wastewater to the treatment plant is not included.

## Included activities end
The activity ends with the wastewater being treated and waste-specific emissions released to the environment. Expenditures from treatment of wastewater in waste treatment plant are included as well as relevant infrastructure of the plant. Emissions from any sludge digestion, biogas generation and utilization (heeding specific wastewater composition) are also included. Waste-specific direct emissions of untreated wastewater and required territory-specific infrastructure for sewers are not contained within this dataset but instead in the regional market datasets for this wastewater.

## Geography
The site has mean annual temperature (MAT) of 16.743579766537 degC, mean annual precipitation (MAP) of 1250.84108527132 mm/year, mean annual actual evaporation (EAT) of 460.58904958214 mm/year. In the WWT plant, 0% of its water input are lost due to evaporation from pools, 0.531% of water is *gained* from organic mass degradation, and 0.316% is removed off site via sludge disposal. (References: UN data, 2020. Precipitation, Environment Statistics Database, United Nations Statistics Division Available at: http://data.un.org/Data.aspx?q=precipitation&d=ENV&f=variableID%3a6; World Bank, 2022. Surface area (sq.km), World Bank Group Available at: https://data.worldbank.org/indicator/AG.SRF.TOTL.K2; Doka G.,2021. A model for composition-specific life cycle inventories of regionalised wastewater fates, Zurich, Switzerland. http://www.doka.ch/publications.htm)

## Technology
This is an inventory for the disposal of a selected wastewater in Global. The reference unit is 1 m3 wastewater input. This activity represents the treatment of a specific wastewater in a WWT plant (while direct emissions and sewering are heeded in the upstream market dataset for this wastewater). The size of the treatment plant infrastructure is for a supranational region average territory situation. The assumed size of the WWTP treats 82.2 Mio m3 per year. The mixture of WWTP with one, two, or three stages is 8.2%-41.2%-50.6%. The actual, waste-specific oxygen requirement in the biological stages is 4.5072645 kg O. The digestion process produces 1023.61555 litres of biogas with an energy content of 23.68775MJ. 60.5% of the biogas is utilized for energy. The remainder is flared. The gross electric efficiency is 26.564%. The gross thermal efficiency is 47.853%. After digestion, the remaining total sludge mass (dry matter) is 7.857kg DM.

## Reference product
- wastewater from vegetable oil refinery: -1 m3; By-product classification Waste; CPC 39990: Other wastes n.e.c.
  production volume 3.61011e9 m3
    The production volume is calculated based on the total amount of wastewater produced in the database for the geography this treatment is taking place.
  property price 0 EUR2005
    Waste products are assigned a price of zero as they are assumed to require further treatment.
  properties: carbon allocation 0.0042399 kg, carbon content 0.00021595, carbon content, fossil 0, carbon content, non-fossil 0.00021595, dry mass 19.6337 kg, fossil share of carbon 0, mass concentration, TOC 10.783 kg/m3, mass concentration, aluminium 0.00619 kg/m3, mass concentration, cadmium 3e-5 kg/m3, mass concentration, copper 3e-5 kg/m3, mass concentration, hydrogen 6.9011 kg/m3, mass concentration, iron 0.01562 kg/m3, mass concentration, lead 2e-5 kg/m3, mass concentration, manganese 0.00039 kg/m3, mass concentration, nickel 0.00025 kg/m3, mass concentration, nitrogen 0.024829 kg/m3, mass concentration, oxygen 1.3209 kg/m3, mass concentration, phophorus 0.57094 kg/m3, mass concentration, sulfur 0.0090676 kg/m3, mass concentration, zinc 0.00129 kg/m3, water content 49.9328, water in wet mass 980.366 kg, wet mass 1000 kg

## Inputs from technosphere
- aluminium scrap, post-consumer, prepared for melting: -6.68914e-5 kg; lognormal variance with pedigree 0.3611, pedigree (1,1,1,1,1)
  scrap output from used infrastructure for wastewater treatment plant.
  Uncertainty: Uncertainty calculated from wastewater technosphere fate uncertainty and treatment infrastructure uncertainty.
  production volume
    Calculated in proportion to wastewater reference product.
  properties: dry mass 1 kg, price 0.806 EUR2005, wet mass 1 kg
- aluminium, cast alloy: 6.68914e-5 kg; lognormal variance with pedigree 0.3613, pedigree (1,1,2,1,1)
  For infrastructure for wastewater treatment plant.
  Uncertainty: Uncertainty calculated from wastewater technosphere fate uncertainty and treatment infrastructure uncertainty.
  properties: dry mass 1 kg, wet mass 1 kg
- chemical, inorganic: 4.35325e-5 kg; lognormal variance with pedigree 0.3613, pedigree (1,1,2,1,1)
  (same comment as for aluminium, cast alloy)
  properties: carbon content, fossil 0.003, dry mass 1 kg, wet mass 1 kg
- chemical, organic: 0.000347198 kg; lognormal variance with pedigree 0.3613, pedigree (1,1,2,1,1)
  (same comment as for aluminium, cast alloy)
  properties: carbon content, fossil 0.628, dry mass 1 kg, heating value, net 19.03 MJ, wet mass 1 kg
  note on carbon content, fossil: This dataset is an unweighted average of 20 organic substances (listed in Tab 88.1, ecoinvent v2.2 report 8, part II), being part of the top100 chemicals included in this database. The C-content has also been calculated as an unweighted average of the C content of the substances composing this dataset.
- concrete, 25MPa: 2.25459e-6, 1.44906e-7, 5.57139e-5, 2.29113e-6, 6.76725e-8, 3.34656e-7 m3 (6 suppliers, which the file names only by identifier); sum of these 6.08069e-5 m3; lognormal variance with pedigree 0.3613, pedigree (1,1,2,1,1)
  (same comment as for aluminium, cast alloy)
  properties: cement content 206 kg, dry mass 2285 kg, fly ash content 69 kg, gravel content 1100 kg, sand content 910 kg, water content 0.0538293, wet mass 2408 kg
- copper scrap, sorted, pressed: -8.06944e-5 kg; lognormal variance with pedigree 0.3611, pedigree (1,1,1,1,1)
  (same comment as for aluminium scrap, post-consumer, prepared for melting)
  production volume
    Calculated in proportion to wastewater reference product.
  properties: dry mass 1 kg, price 2.84 EUR2005, wet mass 1 kg
- copper, cathode: 8.06944e-5 kg; lognormal variance with pedigree 0.3613, pedigree (1,1,2,1,1)
  (same comment as for aluminium, cast alloy)
  property copper content 1; name copper_content_cathode
  properties: dry mass 1 kg, wet mass 1 kg
- electricity, medium voltage: 11.6302 kWh; lognormal variance with pedigree 0.1805, pedigree (1,1,2,1,1)
  processing energy in wastewater treatment plant.
  Uncertainty: Uncertainty calculated from wastewater technosphere fate uncertainty and treatment infrastructure uncertainty.
- excavation, hydraulic digger: 0.000514629 m3; lognormal variance with pedigree 0.3613, pedigree (1,1,2,1,1)
  (same comment as for aluminium, cast alloy)
- extrusion, plastic pipes: 0.000205983 kg; lognormal variance with pedigree 0.3613, pedigree (1,1,2,1,1)
  (same comment as for aluminium, cast alloy)
- glass fibre: 0.000128474 kg; lognormal variance with pedigree 0.3613, pedigree (1,1,2,1,1)
  (same comment as for aluminium, cast alloy)
  properties: dry mass 1 kg, wet mass 1 kg
- heat, central or small-scale, other than natural gas: -3.12807 MJ; lognormal variance with pedigree 0.9602, pedigree (1,1,1,1,1)
  net heat output from digester gas utilization in wastewater treatment plant.
  Uncertainty: Uncertainty calculated from wastewater technosphere fate uncertainty, wastewater composition uncertainty, and treatment model uncertainty
  production volume
    Calculated in proportion to wastewater reference product.
  properties: heating value, net 1 MJ, price 0.0106 EUR2005
- inert waste, for final disposal: -0.0048336, -3.1468e-5 kg (2 suppliers, which the file names only by identifier); sum of these -0.00486507 kg; lognormal variance with pedigree 0.2711, pedigree (1,1,1,1,1)
  approximation for waste sand removed from wastewater in treatment plant.
  Uncertainty: Uncertainty calculated from wastewater technosphere fate uncertainty and treatment infrastructure uncertainty.
  production volume
    Calculated in proportion to wastewater reference product.
  properties: dry mass 0.995 kg, water content 0.00502513, wet mass 1 kg
- iron scrap, sorted, pressed: -0.000272344, -0.000272344 kg (2 suppliers, which the file names only by identifier); sum of these -0.000544687 kg; lognormal variance with pedigree 0.3611, pedigree (1,1,1,1,1)
  (same comment as for aluminium scrap, post-consumer, prepared for melting)
  production volume
    Calculated in proportion to wastewater reference product.
  properties: dry mass 1 kg, price 0.175 EUR2005, wet mass 1 kg
- iron sulfate: 2.2945, 1.13316 kg (2 suppliers, which the file names only by identifier); sum of these 3.42766 kg; lognormal variance with pedigree 0.166, pedigree (1,1,2,1,1)
  precipitation agent in 3rd stage of wastewater treatment.
  Uncertainty: Uncertainty calculated from wastewater technosphere fate uncertainty, wastewater composition uncertainty, and treatment model uncertainty
  properties: dry mass 1 kg, wet mass 1 kg
- limestone, crushed, washed: 0.00139495, 1.18941e-5 kg (2 suppliers, which the file names only by identifier); sum of these 0.00140684 kg; lognormal variance with pedigree 0.3613, pedigree (1,1,2,1,1)
  (same comment as for aluminium, cast alloy)
  properties: carbon content, fossil 0.117257, dry mass 0.998 kg, water content 0.00200401, wet mass 1 kg
- pitch: 1.51311e-6, 1.74947e-7, 8.62346e-8, 1.27677e-7, 2.20629e-5, 3.29543e-8, 3.90296e-6, 5.01408e-6 kg (8 suppliers, which the file names only by identifier); sum of these 3.29148e-5 kg; lognormal variance with pedigree 0.3613, pedigree (1,1,2,1,1)
  (same comment as for aluminium, cast alloy)
  properties: carbon content, fossil 0.83, dry mass 1 kg, heating value, net 28 MJ, wet mass 1 kg
- polyacrylamide: 0.147237 kg; lognormal variance with pedigree 0.07543, pedigree (1,1,2,1,1)
  approximation for Polyacrylamide flocculant in 2nd stage sludge precipitation.
  Uncertainty: Uncertainty calculated from wastewater technosphere fate uncertainty and treatment infrastructure uncertainty.
  property molecular weight 0 g/mol; name C3H5NO_mol_weight
  properties: carbon content, fossil 0.51, dry mass 1 kg, heating value, net 23.88 MJ, wet mass 1 kg
  note on molecular weight: Taken from http://chem.sis.nlm.nih.gov/chemidplus/rn/79-06-1.
- polyethylene, high density, granulate: 0.000204921 kg; lognormal variance with pedigree 0.3613, pedigree (1,1,2,1,1)
  (same comment as for aluminium, cast alloy)
  properties: carbon content, fossil 0.857143, dry mass 1 kg, heating value, net 42.47 MJ, wet mass 1 kg
- polyethylene, low density, granulate: 1.06177e-6 kg; lognormal variance with pedigree 0.3613, pedigree (1,1,2,1,1)
  For infrastructure for sewer pipes.
  Uncertainty: Uncertainty calculated from wastewater technosphere fate uncertainty and treatment infrastructure uncertainty.
  properties: carbon content, fossil 0.857143, dry mass 1 kg, heating value, net 42.47 MJ, wet mass 1 kg
- reinforcing steel: 0.00519523 kg; lognormal variance with pedigree 0.3613, pedigree (1,1,2,1,1)
  (same comment as for aluminium, cast alloy)
  properties: carbon content, fossil 0.004, dry mass 1 kg, wet mass 1 kg
- sewage sludge, 70% water, WWT, WW from vegetable oil refinery: -10.6464 kg; lognormal variance with pedigree 0.00386, pedigree (1,1,1,1,1)
  generated sewage sludge output to municipal incineration.
  Uncertainty: Uncertainty calculated from wastewater technosphere fate uncertainty, wastewater composition uncertainty, and treatment model uncertainty.
  production volume
    Calculated in proportion to wastewater reference product.
  properties: carbon content, fossil 0.00516538, carbon content, non-fossil 0.492143, dry mass 0.3 kg, heating value, gross 85.8168 MJ, heating value, net 60.0663 MJ, hydrogen content 0.0676138, iron content 0.0184578, nitrogen content 0.0024349, oxygen content 0.382938, phosphorus content 0.0308722, water content 2.33333, wet mass 1 kg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
- sewage sludge, 75% water, WWT, WW from vegetable oil refinery: -8.21034 kg; lognormal variance with pedigree 0.002755, pedigree (1,1,1,1,1)
  generated sewage sludge output to sanitary landfill.
  Uncertainty: Uncertainty calculated from wastewater technosphere fate uncertainty, wastewater composition uncertainty, and treatment model uncertainty.
  production volume
    Calculated in proportion to wastewater reference product.
  properties: carbon content, fossil 0.00518714, carbon content, non-fossil 0.491491, dry mass 0.25 kg, heating value, gross 21.5344 MJ, heating value, net 13.5974 MJ, hydrogen content 0.0675283, iron content 0.0185453, nitrogen content 0.00260133, oxygen content 0.383308, phosphorus content 0.030957, water content 3, wet mass 1 kg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
- sewage sludge, 97% water, WWT, WW from vegetable oil refinery: -247.063 kg; lognormal variance with pedigree 6.219e-5, pedigree (1,1,1,1,1)
  generated sewage sludge output to landfarming.
  Uncertainty: Uncertainty calculated from wastewater technosphere fate uncertainty, wastewater composition uncertainty, and treatment model uncertainty.
  production volume
    Calculated in proportion to wastewater reference product.
  properties: aluminium content 0.000214641, carbon content, fossil 0.00516538, carbon content, non-fossil 0.492143, dry mass 0.03 kg, heating value, gross 85.8168 MJ, hydrogen content 0.0676138, iron content 0.0184578, nitrogen content 0.0024349, oxygen content 0.382938, phosphorus content 0.0308722, water content 32.3333, wet mass 1 kg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
- steel, chromium steel 18/8, hot rolled: 0.000544687 kg; lognormal variance with pedigree 0.3613, pedigree (1,1,2,1,1)
  (same comment as for aluminium, cast alloy)
  properties: carbon content, fossil 0.0008, dry mass 1 kg, wet mass 1 kg
- stone wool, packed: 5.73355e-5 kg; lognormal variance with pedigree 0.3613, pedigree (1,1,2,1,1)
  (same comment as for aluminium, cast alloy)
  properties: carbon content, fossil 0.015401, dry mass 1 kg, wet mass 1 kg
- synthetic rubber: 6.15826e-5 kg; lognormal variance with pedigree 0.3613, pedigree (1,1,2,1,1)
  (same comment as for aluminium, cast alloy)
  properties: carbon content, fossil 0.871949, dry mass 1 kg, heating value, net 26.42 MJ, wet mass 1 kg
- tap water: 0.00802225 kg; lognormal variance with pedigree 0.3613, pedigree (1,1,2,1,1)
  (same comment as for aluminium, cast alloy)
  properties: carbon content, fossil 0.00178991, dry mass 0.000337476 kg, water content 2962.17, wet mass 1 kg
- waste bitumen: -1.05986e-5, -2.7704e-7, -2.20392e-5 kg (3 suppliers, which the file names only by identifier); sum of these -3.29148e-5 kg; lognormal variance with pedigree 0.3611, pedigree (1,1,1,1,1)
  waste output from used infrastructure for wastewater treatment plant and sewer pipes.
  Uncertainty: Uncertainty calculated from wastewater technosphere fate uncertainty and treatment infrastructure uncertainty.
  production volume
    Calculated in proportion to wastewater reference product.
  properties: carbon content, fossil 0.842657, dry mass 0.986 kg, heating value, net 40.2 MJ, water content 0.0141988, wet mass 1 kg
  note on heating value, net: Literature value, Source: IPCC 2006, 2006 IPCC Guidelines for National Greenhouse Gas Inventories, Prepared by the National Greenhouse Gas Inventories Programme, Eggleston H.S., Buendia L., Miwa K., Ngara T. and Tanabe K. (eds). Published: IGES, Japan
- waste graphical paper: -6.60336e-5, -0.000238607, -2.32662e-5, -0.000432427, -4.30681e-5, -5.77404e-6, -0.00106198, -0.00803303 kg (8 suppliers, which the file names only by identifier); sum of these -0.00990419 kg; lognormal variance with pedigree 0.2711, pedigree (1,1,1,1,1)
  approximation for large waste biomass pieces removed from wastewater in treatment plant.
  Uncertainty: Uncertainty calculated from wastewater technosphere fate uncertainty and treatment model uncertainty
  production volume
    Calculated in proportion to wastewater reference product.
  properties: carbon content, non-fossil 0.454955, dry mass 0.888 kg, heating value, net 14.12 MJ, water content 0.126126, wet mass 1 kg
  note on heating value, net: Value taken from the general comment of the treatment dataset.
- waste mineral wool: -1.89635e-7, -4.05269e-5, -1.6619e-5 kg (3 suppliers, which the file names only by identifier); sum of these -5.73355e-5 kg; lognormal variance with pedigree 0.3611, pedigree (1,1,1,1,1)
  (same comment as for waste bitumen)
  production volume
    Calculated in proportion to wastewater reference product.
  properties: dry mass 1 kg, wet mass 1 kg
- waste plastic, mixture: -5.55836e-6, -0.00109997, -0.000953325, -3.03564e-5, -2.88262e-5, -7.34957e-5, -1.22636e-5, -0.00770039 kg (8 suppliers, which the file names only by identifier); sum of these -0.00990419 kg; lognormal variance with pedigree 0.2711, pedigree (1,1,1,1,1)
  approximation for waste macroplastic removed from wastewater in treatment plant.
  Uncertainty: Uncertainty calculated from wastewater technosphere fate uncertainty and treatment model uncertainty
  production volume
    Calculated in proportion to wastewater reference product.
  properties: carbon content, fossil 0.747344, dry mass 0.847 kg, heating value, net 30.79 MJ, water content 0.180638, wet mass 1 kg
- waste polyethylene/polypropylene product: -5.77769e-5, -1.73374e-6, -0.000146472 kg (3 suppliers, which the file names only by identifier); sum of these -0.000205983 kg; lognormal variance with pedigree 0.3611, pedigree (1,1,1,1,1)
  (same comment as for waste bitumen)
  production volume
    Calculated in proportion to wastewater reference product.
  properties: carbon content, fossil 0.748045, dry mass 0.847 kg, heating value, net 42.47 MJ, water content 0.180638, wet mass 1 kg
- waste reinforced concrete: -0.140261, -0.00982788, -0.000104134 kg (3 suppliers, which the file names only by identifier); sum of these -0.150193 kg; lognormal variance with pedigree 0.3611, pedigree (1,1,1,1,1)
  (same comment as for waste bitumen)
  production volume
    Calculated in proportion to wastewater reference product.
  properties: dry mass 0.99418 kg, water content 0.00585407, wet mass 1 kg
- waste reinforcement steel: -0.00519163, -3.60483e-6 kg (2 suppliers, which the file names only by identifier); sum of these -0.00519523 kg; lognormal variance with pedigree 0.3611, pedigree (1,1,1,1,1)
  (same comment as for waste bitumen)
  production volume
    Calculated in proportion to wastewater reference product.
  properties: dry mass 1 kg, wet mass 1 kg
- waste rubber, unspecified: -3.01583e-5, -1.26604e-6, -3.01583e-5 kg (3 suppliers, which the file names only by identifier); sum of these -6.15826e-5 kg; lognormal variance with pedigree 0.3611, pedigree (1,1,1,1,1)
  (same comment as for waste bitumen)
  production volume
    Calculated in proportion to wastewater reference product.
  properties: carbon content, fossil 0.853, dry mass 1 kg, heating value, net 27.19 MJ, wet mass 1 kg

## Inputs from nature
- Occupation, construction site [natural resource, land]: 9.29047e-5 m2*year; lognormal variance with pedigree 0.3613, pedigree (1,1,2,1,1)
  land use for infrastructure for wastewater treatment plant.
  Uncertainty: Uncertainty calculated from wastewater technosphere fate uncertainty and treatment infrastructure uncertainty.
- Occupation, industrial area [natural resource, land]: 0.00111486 m2*year; lognormal variance with pedigree 0.3613, pedigree (1,1,2,1,1)
  (same comment as for Occupation, construction site)
- Occupation, urban/industrial fallow (non-use) [natural resource, land]: 0.000743238 m2*year; lognormal variance with pedigree 0.3613, pedigree (1,1,2,1,1)
  (same comment as for Occupation, construction site)
- Oxygen [natural resource, in air]: 10.4171 kg; lognormal variance with pedigree 0.06053, pedigree (1,1,2,1,1)
  Oxygen input for wastewater treatment (biological stage + biogas combustion).
  Uncertainty: Uncertainty calculated from wastewater technosphere fate uncertainty, wastewater composition uncertainty, and treatment model uncertainty.
- Transformation, from pasture, man made [natural resource, land]: 4.64524e-5 m2; lognormal variance with pedigree 0.3613, pedigree (1,1,2,1,1)
  (same comment as for Occupation, construction site)
- Transformation, to industrial area [natural resource, land]: 2.78714e-5 m2; lognormal variance with pedigree 0.3613, pedigree (1,1,2,1,1)
  (same comment as for Occupation, construction site)
- Transformation, to urban/industrial fallow (non-use) [natural resource, land]: 1.85809e-5 m2; lognormal variance with pedigree 0.3613, pedigree (1,1,2,1,1)
  (same comment as for Occupation, construction site)

## Emissions to nature
- Cadmium II [air, non-urban air or from high stacks]: 8.11092e-13 kg; lognormal variance with pedigree 0.8081, pedigree (1,1,2,1,1)
  emission from rural wastewater treatment plant.
  Uncertainty: Uncertainty calculated from wastewater technosphere fate uncertainty, wastewater composition uncertainty, and treatment model uncertainty.
- Cadmium II [air, urban air close to ground]: 1.73e-12 kg; lognormal variance with pedigree 0.8081, pedigree (1,1,2,1,1)
  emission from urban wastewater treatment plant.
  Uncertainty: Uncertainty calculated from wastewater technosphere fate uncertainty, wastewater composition uncertainty, and treatment model uncertainty
- Carbon dioxide, fossil [air, non-urban air or from high stacks]: 0.0107792 kg; lognormal variance with pedigree 0.4212, pedigree (1,1,2,1,1)
  emission from rural wastewater treatment plant. Contribution from biogas combustion in WWTP is 100%.
  Uncertainty: Uncertainty calculated from wastewater technosphere fate uncertainty, wastewater composition uncertainty, and treatment model uncertainty.
- Carbon dioxide, fossil [air, urban air close to ground]: 0.0229912 kg; lognormal variance with pedigree 0.4212, pedigree (1,1,2,1,1)
  emission from urban wastewater treatment plant. Contribution from biogas combustion in WWTP is 100%.
  Uncertainty: Uncertainty calculated from wastewater technosphere fate uncertainty, wastewater composition uncertainty, and treatment model uncertainty
- Carbon dioxide, non-fossil [air, non-urban air or from high stacks]: 3.86436 kg; lognormal variance with pedigree 0.08643, pedigree (1,1,2,1,1)
  emission from rural wastewater treatment plant. Contribution from biological treatment stage (stage 2) in WWTP is 73.49%. Contribution from biogas combustion in WWTP is 26.51%.
  Uncertainty: Uncertainty calculated from wastewater technosphere fate uncertainty, wastewater composition uncertainty, and treatment model uncertainty.
- Carbon dioxide, non-fossil [air, urban air close to ground]: 8.24238 kg; lognormal variance with pedigree 0.08643, pedigree (1,1,2,1,1)
  emission from urban wastewater treatment plant. Contribution from biological treatment stage (stage 2) in WWTP is 73.49%. Contribution from biogas combustion in WWTP is 26.51%.
  Uncertainty: Uncertainty calculated from wastewater technosphere fate uncertainty, wastewater composition uncertainty, and treatment model uncertainty
- Dinitrogen monoxide [air, non-urban air or from high stacks]: 1.71036e-5 kg; lognormal variance with pedigree 0.1029, pedigree (1,1,2,1,1)
  (same comment as for Cadmium II)
- Dinitrogen monoxide [air, urban air close to ground]: 3.64806e-5 kg; lognormal variance with pedigree 0.1029, pedigree (1,1,2,1,1)
  (same comment as for Cadmium II)
- Heat, waste [air, non-urban air or from high stacks]: 22.3803 MJ; lognormal variance with pedigree 0.1805, pedigree (1,1,2,1,1)
  emission from rural wastewater treatment plant from digester gas combustion and infrastructure electricity use.
  Uncertainty: Uncertainty calculated from wastewater technosphere fate uncertainty, wastewater composition uncertainty, treatment infrastructure uncertainty, and treatment model uncertainty.
- Heat, waste [air, urban air close to ground]: 58.0394 MJ; lognormal variance with pedigree 0.1805, pedigree (1,1,2,1,1)
  emission from urban wastewater treatment plant from digester gas combustion and infrastructure electricity use.
  Uncertainty: Uncertainty calculated from wastewater technosphere fate uncertainty, wastewater composition uncertainty, and treatment model uncertainty
- Lead II [air, non-urban air or from high stacks]: 4.52069e-14 kg; lognormal variance with pedigree 0.8884, pedigree (1,1,2,1,1)
  (same comment as for Cadmium II)
- Lead II [air, urban air close to ground]: 9.64228e-14 kg; lognormal variance with pedigree 0.8884, pedigree (1,1,2,1,1)
  (same comment as for Cadmium II)
- Methane, fossil [air, non-urban air or from high stacks]: 1.91747e-5 kg; lognormal variance with pedigree 0.4212, pedigree (1,1,2,1,1)
  (same comment as for Cadmium II)
- Methane, fossil [air, urban air close to ground]: 4.08982e-5 kg; lognormal variance with pedigree 0.4212, pedigree (1,1,2,1,1)
  (same comment as for Cadmium II)
- Methane, non-fossil [air, non-urban air or from high stacks]: 0.00182528 kg; lognormal variance with pedigree 0.4212, pedigree (1,1,2,1,1)
  (same comment as for Cadmium II)
- Methane, non-fossil [air, urban air close to ground]: 0.00389317 kg; lognormal variance with pedigree 0.4212, pedigree (1,1,2,1,1)
  (same comment as for Cadmium II)
- Nitrogen oxides [air, non-urban air or from high stacks]: 6.9877e-5 kg; lognormal variance with pedigree 0.4359, pedigree (1,1,2,1,1)
  (same comment as for Cadmium II)
- Nitrogen oxides [air, urban air close to ground]: 0.000149042 kg; lognormal variance with pedigree 0.4359, pedigree (1,1,2,1,1)
  (same comment as for Cadmium II)
- Particulate Matter, < 2.5 um [air, non-urban air or from high stacks]: 2.48619e-5 kg; lognormal variance with pedigree 0.1959, pedigree (1,1,2,1,1)
  (same comment as for Cadmium II)
- Particulate Matter, < 2.5 um [air, urban air close to ground]: 5.30286e-5 kg; lognormal variance with pedigree 0.1959, pedigree (1,1,2,1,1)
  (same comment as for Cadmium II)
- Sulfur dioxide [air, non-urban air or from high stacks]: 2.18989e-6 kg; lognormal variance with pedigree 0.4584, pedigree (1,1,2,1,1)
  (same comment as for Cadmium II)
- Sulfur dioxide [air, urban air close to ground]: 4.67087e-6 kg; lognormal variance with pedigree 0.4584, pedigree (1,1,2,1,1)
  (same comment as for Cadmium II)
- Water [air, non-urban air or from high stacks]: 0.000964948 m3; lognormal variance with pedigree 0.4178, pedigree (1,1,2,1,1)
  emission of water to air from rural wastewater treatment plant due to evaporation and digester gas combustion.
  Uncertainty: Uncertainty calculated from wastewater technosphere fate uncertainty, wastewater composition uncertainty, and treatment model uncertainty.
- Water [air, urban air close to ground]: 0.00250243 m3; lognormal variance with pedigree 0.4178, pedigree (1,1,2,1,1)
  emission of water to air from urban wastewater treatment plant due to evaporation and digester gas combustion.
  Uncertainty: Uncertainty calculated from wastewater technosphere fate uncertainty, wastewater composition uncertainty, and treatment model uncertainty
- Aluminium III [water, surface water]: 0.00347731 kg; lognormal variance with pedigree 0.1119, pedigree (1,1,2,1,1)
  (same comment as for Cadmium II)
- BOD5, Biological Oxygen Demand [water, surface water]: 1.14118 kg; lognormal variance with pedigree 0.346, pedigree (1,1,2,1,1)
  (same comment as for Cadmium II)
- COD, Chemical Oxygen Demand [water, surface water]: 4.63995 kg; lognormal variance with pedigree 0.346, pedigree (1,1,2,1,1)
  (same comment as for Cadmium II)
- Cadmium II [water, surface water]: 2.56168e-6 kg; lognormal variance with pedigree 0.7507, pedigree (1,1,2,1,1)
  (same comment as for Cadmium II)
- Copper ion [water, surface water]: 3.09263e-6 kg; lognormal variance with pedigree 0.6163, pedigree (1,1,2,1,1)
  (same comment as for Cadmium II)
- DOC, Dissolved Organic Carbon [water, surface water]: 0.766736 kg; lognormal variance with pedigree 0.346, pedigree (1,1,2,1,1)
  (same comment as for Cadmium II)
- Heat, waste [water, surface water]: 82.5672 MJ; lognormal variance with pedigree 0.08449, pedigree (1,1,2,1,1)
  emission from wastewater treatment plant from degraded organics in biological stage.
  Uncertainty: Uncertainty calculated from wastewater technosphere fate uncertainty, wastewater composition uncertainty, and treatment model uncertainty
- Iron ion [water, surface water]: 1.05932 kg; lognormal variance with pedigree 0.2197, pedigree (1,1,2,1,1)
  (same comment as for Cadmium II)
- Lead II [water, surface water]: 1.24321e-6 kg; lognormal variance with pedigree 1.0612, pedigree (1,1,2,1,1)
  (same comment as for Cadmium II)
- Manganese II [water, surface water]: 3.8776e-5 kg; lognormal variance with pedigree 0.5159, pedigree (1,1,2,1,1)
  (same comment as for Cadmium II)
- Nickel II [water, surface water]: 0.000125024 kg; lognormal variance with pedigree 0.1826, pedigree (1,1,2,1,1)
  (same comment as for Cadmium II)
- Nitrate [water, surface water]: 0.0656812 kg; lognormal variance with pedigree 0.1004, pedigree (1,1,2,1,1)
  (same comment as for Cadmium II)
- Phosphate [water, surface water]: 0.55394 kg; lognormal variance with pedigree 0.1467, pedigree (1,1,2,1,1)
  (same comment as for Cadmium II)
- Sulfate [water, surface water]: 2.19367 kg; lognormal variance with pedigree 0.1877, pedigree (1,1,2,1,1)
  (same comment as for Cadmium II)
- TOC, Total Organic Carbon [water, surface water]: 1.25404 kg; lognormal variance with pedigree 0.346, pedigree (1,1,2,1,1)
  (same comment as for Cadmium II)
- Water [water, surface water]: 3.13115 m3; lognormal variance with pedigree 0.000200035, pedigree (1,1,2,1,1)
  release of wastewater (treated or untreated) minus water evaporated to air in treatment plant, heeding any water generation from organic compound degradation in treatment plant.
  Uncertainty: Uncertainty calculated from wastewater technosphere fate uncertainty, wastewater composition uncertainty, and treatment model uncertainty
- Zinc II [water, surface water]: 0.00016878 kg; lognormal variance with pedigree 0.3291, pedigree (1,1,2,1,1)
  (same comment as for Cadmium II)
