# treatment of electronics scrap, metals recovery in copper smelter

Dataset: EcoSpold 2, unit process
Geography: RoW
Time period: 2000-01-01 to 2022-12-31
Technology level: current
Classification: ISIC rev.4 ecoinvent: 2420:Manufacture of basic precious and other non-ferrous metals
Classification: EcoSpold01Categories: metals/extraction
Tags: ConvertedDataset
Scenario: Business-as-Usual
System model: Substitution, consequential, long-term
Generated by: Mischa Classen
Published in: Classen M. 2009
Database: ecoinvent
isCopyrightProtected: true

## General comment
The multi-output-process "secondary copper conversion" delivers the co-products "metal values from electric waste, in blister-copper, at converter" and "lead, secondary, from electronic and electric scrap recycling, at plant". The product "metal values from electric waste, …" is an intermediary in the production of secondary gold from electric scrap and is not to be used by the LCA practitioner. The flow "lead, …" is a by-product of this process that receives part of the burdens allocated. It must not be used to reflect lead.
[This dataset was already contained in the ecoinvent database version 2. It was not individually updated during the transfer to ecoinvent version 3. Life Cycle Impact Assessment results may still have changed, as they are affected by changes in the supply chain, i.e. in other datasets. This dataset was generated following the ecoinvent quality guidelines for version 2. It may have been subject to central changes described in the ecoinvent version 3 change report (http://www.ecoinvent.org/database/ecoinvent-version-3/reports-of-changes/), and the results of the central updates were reviewed extensively. The changes added e.g. consistent water flows and other information throughout the database. The documentation of this dataset can be found in the ecoinvent reports of version 2, which are still available via the ecoinvent website. The change report linked above covers all central changes that were made during the conversion process.]

## Included activities end
Inculdes the processing of e-scrap in the Boliden process by the Kaldo plant and the converter aisle.

## Geography
Data describes a Swedish plant that is singular in the region and ranges worldwide among the big producer. It may be taken as approximation for the global situation

## Technology
Conversion of Copper in a Kaldo Converter and treatment in converter aisle.

## Reference product
- electronics scrap: -1 kg; name RP; By-product classification Recyclable; CPC 39: Wastes or scraps
  Calculated relative to metal part of electronics scrap output.
  production volume 8.38013e7 kg
    Calculated relative to metal part of electronics scrap output.
  property carbon content, fossil 0.317311
    Carbon content assumed equal with the intermediate exchange of "electronic component, passive, unspecified"
  property carbon content, non-fossil 0.0045566
    (same comment as for electronics scrap)
  property price 16.1 EUR2005
    Temporary price data. Calculated as 90% of purchasers price based on: 2005 import prices (total trades (USD) divided by total weight (kg) in biggest economies of the world: EU27, USA, Brasil, China, India, Japan and Russia) from UN Commodity Trade Statistics Database (http://data.un.org/Explorer.aspxDatabase [Accessed 2011.06.20]). Commodity: Waste/scrap, precious metals except pure gold/platinum
  properties: carbon allocation 0.321868 kg, carbon content 0.321868, dry mass 1 kg, water content 0, water in wet mass 0 kg, wet mass 1 kg

## Inputs from technosphere
- copper slag: -0.61709 kg; name ByP_03; lognormal variance with pedigree 0.0732, pedigree (2,3,1,5,4)
  production volume
    Calculated from production volume of reference product using the relative outputs.
  properties: aluminium content 0.0267, calcium content 0.00713, copper content 0.00807, dry mass 1 kg, iron content 0.379, magnesium content 0.00485, potassium content 0.0317, silicon content 0.155, sodium content 0.008, tungsten content 0.23999, wet mass 1 kg, zinc content 0.00606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
- copper smelting facility: 3.06445e-11 unit; lognormal variance with pedigree 0.3432, pedigree (2,3,5,5,1)
  EcoSpold01Location=SE
- electricity, high voltage: 3.31246e-5, 2.74558e-5, 9.30504e-5, 1.82559e-5, 0.000132015, 3.93149e-5, 0.00011116, 0.000146606, 0.000146581, 0.0325364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 kWh (22 suppliers, which the file names only by identifier); sum of these 0.0461973 kWh; lognormal variance with pedigree 0.0446, pedigree (3,3,5,5,1)
  EcoSpold01Location=UCTE
- lead: -0.0160024 kg; name ByP_02
  EcoSpold01Location=SE
  production volume
    Calculated from production volume of reference product using the relative outputs.
  properties: dry mass 1 kg, price 0.744 EUR2005, wet mass 1 kg
- metal part of electronics scrap, in copper, anode: -0.367053 kg; name ByP_01
  EcoSpold01Location=SE
  production volume
    Calculated from the "treatment of metal part of electronics scrap, in copper, anode, by electrolytic refining"/GLO.
  properties: dry mass 1 kg, price 53.8 EUR2005, wet mass 1 kg
- quicklime, milled, loose: 0.371898, 0.00315684 kg (2 suppliers, which the file names only by identifier); sum of these 0.375055 kg; lognormal variance with pedigree 0.0432, pedigree (2,3,5,5,1)
  EcoSpold01Location=CH
  properties: dry mass 0.99 kg, water content 0.010101, wet mass 1 kg

## Emissions to nature
All rows: lognormal variance with pedigree 0.692, pedigree (1,1,5,5,1)
- Arsenic ion [air, non-urban air or from high stacks]: 3.29195e-11 kg
  uncertainty estimated
- Cadmium II [air, non-urban air or from high stacks]: 1.18536e-9 kg
  uncertainty estimated
- Chlorine [air, non-urban air or from high stacks]: 2.51296e-6 kg
  uncertainty estimated
- Copper ion [air, non-urban air or from high stacks]: 7.37447e-8 kg
  uncertainty estimated
- Dioxins, measured as 2,3,7,8-tetrachlorodibenzo-p-dioxin [air, non-urban air or from high stacks]: 4.97834e-11 kg
  uncertainty estimated
- Fluorine [air, non-urban air or from high stacks]: 2.01512e-8 kg
  uncertainty estimated
- Lead II [air, non-urban air or from high stacks]: 5.05543e-7 kg
  uncertainty estimated
- Mercury II [air, non-urban air or from high stacks]: 2.37072e-9 kg
  uncertainty estimated
- Nitrogen oxides [air, non-urban air or from high stacks]: 6.87491e-6 kg
  uncertainty estimated
- Particulate Matter, < 2.5 um [air, non-urban air or from high stacks]: 1.51509e-6 kg
  uncertainty estimated
- Particulate Matter, > 10 um [air, non-urban air or from high stacks]: 5.05029e-7 kg
  uncertainty estimated
- Particulate Matter, > 2.5 um and < 10um [air, non-urban air or from high stacks]: 1.01006e-6 kg
  uncertainty estimated
- Sulfur dioxide [air, non-urban air or from high stacks]: 0.00014623 kg
  uncertainty estimated
- Zinc II [air, non-urban air or from high stacks]: 6.5787e-8 kg
  uncertainty estimated
- Arsenic ion [water, surface water]: 3.78579e-10 kg
  uncertainty estimated
- Cadmium II [water, surface water]: 3.29195e-11 kg
  uncertainty estimated
- Copper ion [water, surface water]: 1.31677e-8 kg
  uncertainty estimated
- Lead II [water, surface water]: 4.60872e-9 kg
  uncertainty estimated
- Mercury II [water, surface water]: 9.87594e-11 kg
  uncertainty estimated
- Zinc II [water, surface water]: 4.27947e-9 kg
  uncertainty estimated

## Sampling procedure
Literature

## Extrapolations
see Geography and Technology This dataset has been copied from an original dataset covering the geography SE. The uncertainty has been adjusted accordingly.

## Review by Roberto Dones 2007-08-22
Passed

## Review by Emilia Moreno Ruiz 2015-10-22
PV adjusted
