# silver-gold mine operation with refinery

Dataset: EcoSpold 2, unit process
Geography: CL
Time period: 2002-01-01 to 2022-12-31
Technology level: current
Classification: ISIC rev.4 ecoinvent: 0729:Mining of other non-ferrous metal ores
Tags: ConvertedDataset
Scenario: Business-as-Usual
System model: Substitution, consequential, long-term
Generated by: Matthias Tuchschmid (obsolete)
Published in: Classen M. 2009
Database: ecoinvent
isCopyrightProtected: true

## General comment
This dataset describes the joint production of 112000 kg of silver and 2990 kg of gold. Data was taken from the environmental report of Placer Dome Inc. for La Coipa Mine, an open pit one. Since the mine has been sold in 2006 to Kinross Gold Corporation and Goldcorp Inc., no more recent data is available. Also, both enterprises do not publish their environmental data. Therefore, the older data from 2002 is used to model the gold- and silver production in Chile.
[This dataset was already contained in the ecoinvent database version 2. It was not individually updated during the transfer to ecoinvent version 3. Life Cycle Impact Assessment results may still have changed, as they are affected by changes in the supply chain, i.e. in other datasets. This dataset was generated following the ecoinvent quality guidelines for version 2. It may have been subject to central changes described in the ecoinvent version 3 change report (http://www.ecoinvent.org/database/ecoinvent-version-3/reports-of-changes/), and the results of the central updates were reviewed extensively. The changes added e.g. consistent water flows and other information throughout the database. The documentation of this dataset can be found in the ecoinvent reports of version 2, which are still available via the ecoinvent website. The change report linked above covers all central changes that were made during the conversion process.]

## Included activities start
From the transport of raw materials to the mine.

## Included activities end
This activity ends with the refining of gold and silver by means of Wohlwill and Möbius electrolysis, respectively.The dataset includes a primary crushing step, a pre-crushing circuit, a grinding step, a leaching step, a filtering and washing step, and Merrill-Crowe metal recovery circuit. The dataset also includes energy and material consumption, water and air emissions, and land use.

The dataset does not include the emissions from the refining step.

## Geography
Material requirements are estimated with Australian data

## Technology
OPEN PIT MINING:
The ore is mined in four steps: drilling, blasting, loading and hauling. In the case of a surface mine, a pattern of holes is drilled in the pit and filled with explosives. The explosives are detonated in order to break up the ground so large shovels or front-end loaders can load it into haul trucks.
BENEFICIATION:
The processing plant consists of primary crushing, a pre-crushing circuit, (semi autogenous ball mill crushing) grinding, leaching, filtering and washing, Merrill-Crowe plant and doré refinery. The Merrill-Crowe metal recovery circuit is better than a carbon-in-pulp system for the high-grade silver material. Tailings are filtered to recover excess water as well as residual cyanide and metals. A dry tailings disposal system was preferred to a conventional wet tailings impoundment because of site-specific environmental considerations.

## Time period
Period of public environmental report

## Parameters
- fraction, process water, to air: 0.15 dimensionless; name fraction_PW_to_air; lognormal variance with pedigree 0.092025, pedigree (4,4,3,2,4)
  Literature value. In case when no industry/process specific data are available, default evaporation fraction value is used. This value is 15% and is based on literature (Statistics Canada, 2007 & Shaffer, K.H., 2008, Consumptive water use in the Great Lakes Basin, USGS & Shiklomanov, 2003, World Water Resources at the Beginning of the 21st Century) and has been approved by an expert.

## Reference product
- silver: 1 kg; By-product classification allocatable product; CPC 41310: Silver (including silver plated with gold or platinum), unwrought or in semi-manufactured forms, or in powder […]; CAS 7440-22-4
  Silver is considered a precious metal because of its rarity and corrosion resistance. Silver is often mined together with gold in polymetallic mines. Silver has a moderately high melting point (961.9°C) and the highest electrical and thermal conductivity of all metals. When in the metallic form, silver is unaffected by water or oxygen, but is altered by ozone with the formation of silver oxide, and by sulphur and other sulphur compounds with the formation of silver sulphide (Gasparrini, 1993).
  Uses: The principal users of silver are industrial applications, photography and jewellery.
  production volume 112000 kg
    2.99 t gold and 112 t silver per year
    Limited to one production site in Chile.
  property price 324.357 EUR2005
    Price calculated as 5-year market average (2015-2019; USD/kg; USGS [2020]) and converted to EUR2005 (USD2019/EUR2005 exchange rate: 0.62; Official Data Foundation [2020] and Macrotrends [2020]).
    References:
    Official Data Foundation (2020). Inflation Calculator [Online]. Available from: https://www.officialdata.org/us/inflation/2005?endYear=2019&amount=1 [Accessed 28/07/2020]
    USGS (2020). Mineral Commodity Summaries 2020 [Online]. Available from: https://pubs.usgs.gov/periodicals/mcs2020/mcs2020.pdf [Accessed 28/07/2020]
    Macrotrends (2020). Euro Dollar Exchange Rate (EUR USD) - Historical Chart [Online]. Available from: https://www.macrotrends.net/2548/euro-dollar-exchange-rate-historical-chart [Accessed 28/07/2020]
  properties: carbon allocation 0 kg, carbon content 0, carbon content, fossil 0, carbon content, non-fossil 0, dry mass 1 kg, water content 0, water in wet mass 0 kg, wet mass 1 kg

## Inputs from technosphere
- blasting: 15.3732 kg; source Placer Dome Inc. 2003; lognormal variance with pedigree 0.0413, pedigree (2,3,5,3,1)
  Calculated value: Data was scaled from Peruvian mining by milled ore.
  Further references:
  Classen M. et al. (2009) Life cycle inventories of metals, Part IX: Gold and Silver. Ecoinvent centre, Dubendorf.
  Uncertainty: E
- charcoal: 0.452991 kg; source Placer Dome Inc. 2003; lognormal variance with pedigree 0.0432, pedigree (2,3,5,5,1)
  Calculated value: Data was obtained from Australian mining, scaled by processed gold.
  Proxy: Carbon is approximated with 'charcoal'.
  Further references:
  Stewart M. (1999) Environmental Life Cycle Considerations for Design-Related Decision Making in Minerals Processing. PhD Thesis. University of Cape Town, Cape Town.
  Uncertainty: C
  properties: carbon content, non-fossil 0.8, dry mass 1 kg, heating value, net 28.4 MJ, wet mass 1 kg
  note on heating value, net: Indicative value. Reference: Fuels - Higher and Lower Calorific Values, available at: https://www.engineeringtoolbox.com/fuels-higher-calorific-values-d_169.html
- diesel, burned in building machine: 842.857 MJ; source Placer Dome Inc. 2002; lognormal variance with pedigree 0.0427, pedigree (2,4,5,3,1)
  Literature value.
  Uncertainty: E
  properties: heating value, net 1 MJ
- diesel, burned in diesel-electric generating set, 10MW: 3732.14 MJ; source Placer Dome Inc. 2002; lognormal variance with pedigree 0.0427, pedigree (2,4,5,3,1)
  Literature value.
  Uncertainty: E
  properties: heating value, net 1 MJ
- electricity, medium voltage: 1429.2 kWh; source Placer Dome Inc. 2002; lognormal variance with pedigree 0.0427, pedigree (2,4,5,3,1)
  Calculated value: Total electricity consumption was obtained by adding electricity consumption of the mining and refining steps (see source).
  Uncertainty: E
- gold: -0.0266964 kg
  Gold is considered a precious metal because of its rarity and corrosion resistance. Gold is often mined together with silver in polymetallic mines. Apart from copper, Gold is the only metallic element with a color different from a grey tone. It is a soft yellow metal with a moderately high melting point (1064°C) and a high electrical and thermal conductivity exceeded only among the elements by silver and copper. It is the most malleable and ductile of the metals. One ounce of gold can be beaten in to foil some 300 square feet in area.
  Uses: Gold is used mainly for jewellery, electronics and other industrial and decorative appliances. In electric/electronic devices, it is mostly used as connector or as solder paste (Goosey & Kellner, 2002). The latter one is typically a gold alloy incorporating Si (98%Au, 2%Si), Ge (87.5%Au, 12.5%Ge), In (82%Au, 18%In) or Sn (80%Au, 20%Sn).
  production volume
    2.99 t gold and 112 t silver per year
    Limited to one production site in Chile.
  properties: dry mass 1 kg, price 25128.4 EUR2005, wet mass 1 kg
- hydrochloric acid, without water, in 30% solution state: 0.36417 kg; source Placer Dome Inc. 2003; lognormal variance with pedigree 0.0413, pedigree (2,3,5,3,1)
  Calculated value: Data was obtained from Australian mining, scaled by processed gold.
  Further references:
  Stewart M. (1999) Environmental Life Cycle Considerations for Design-Related Decision Making in Minerals Processing. PhD Thesis. University of Cape Town, Cape Town.
  Uncertainty: C
  properties: dry mass 1 kg, heating value, net 3.32 MJ, wet mass 1 kg
- lime, packed: 1.68759 kg; source Placer Dome Inc. 2003; lognormal variance with pedigree 0.0427, pedigree (2,4,5,3,1)
  (same comment as for hydrochloric acid, without water, in 30% solution state)
  properties: carbon content, fossil 0.117492, dry mass 0.998 kg, water content 0.00200401, wet mass 1 kg
  note on carbon content, fossil: Table 3.1, ecoinvent v2.2 report 7, part VII, pg 3. MW CaCO3=100, MW MgCO3=84
- mine infrastructure, gold and silver: 1.78571e-7 unit; source Placer Dome Inc. 2002; lognormal variance with pedigree 0.3413, pedigree (2,3,5,3,1)
  Literature value.;activityLink introduced to establish a direct link to the corresponding regional supply of this product
  Uncertainty: E
- precious metal refinery: 1.69e-7 unit; source Placer Dome Inc. 2002; lognormal variance with pedigree 0.448, pedigree (4,5,5,5,5)
  Proxy: Refinery infrastructure is approximated with 'precious metal refinery'.
  Uncertainty: E
- sodium cyanide: 19.1071 kg; source Placer Dome Inc. 2002; lognormal variance with pedigree 0.0427, pedigree (2,4,5,3,1)
  Proxy: Cyanide is approximated with 'sodium cyanide'.
  Uncertainty: C
  properties: carbon content, fossil 0.244898, dry mass 1 kg, heating value, net 7.43 MJ, wet mass 1 kg
- sodium hydroxide, without water, in 50% solution state: 0.310875 kg; source Placer Dome Inc. 2003; lognormal variance with pedigree 0.0432, pedigree (2,3,5,5,1)
  Calculated value: Data was obtained from Australian mining, scaled by processed gold.
  Proxy: Caustic is approximated with 'sodium hydroxide, without water, in 50% solution state'.
  Further references:
  Stewart M. (1999) Environmental Life Cycle Considerations for Design-Related Decision Making in Minerals Processing. PhD Thesis. University of Cape Town, Cape Town.
  Uncertainty: C
  properties: dry mass 1 kg, heating value, net 3.03 MJ, wet mass 1 kg
- sulfidic tailings, from silver mine operation: -20099.1 kg; source Placer Dome Inc. 2003; lognormal variance with pedigree 0.0015, pedigree (2,3,2,3,1)
  Calculated value: Data was obtained from Papua New Guinea mining, scaled by milled ore.
  Proxy: Disposal is approximated with 'sulfidic tailing, off-site'.
  Further references:
  Classen M. et al. (2009) Life cycle inventories of metals, Part IX: Gold and Silver. Ecoinvent centre, Dubendorf.
  Uncertainty: E
  production volume
    Calculated from the production volume of silver in proportion to the respective output amounts.
  properties: aluminium content 0.017206, calcium content 0.003752, carbon content, fossil 0.0087785, dry mass 0.7 kg, iron content 0.013963, magnesium content 0.0020826, oxygen content 0.88851, potassium content 0.0032546, silicon content 0.055749, sodium content 0.0015368, water content 0.428571, wet mass 1 kg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
- sulfuric acid: 0.0177643 kg; source Placer Dome Inc. 2003; lognormal variance with pedigree 0.0432, pedigree (2,3,5,5,1)
  (same comment as for hydrochloric acid, without water, in 30% solution state)
  properties: dry mass 1 kg, wet mass 1 kg
- zinc: 0.0772759 kg; source Placer Dome Inc. 2003; lognormal variance with pedigree 0.0432, pedigree (2,3,5,5,1)
  (same comment as for hydrochloric acid, without water, in 30% solution state)
  properties: dry mass 1 kg, wet mass 1 kg

## Inputs from nature
- Gold [natural resource, in ground]: 0.0314071 kg; source Placer Dome Inc. 2003; lognormal variance with pedigree 0.0427, pedigree (2,4,5,3,1)
  1.1 ppm Au and 42 ppm Ag in ore; Calculated value: The recovery rate (proportion of valuable material physically recovered in the processing of ore) is taken into account in order to define the resource extraction. The average concentration (head grade, expressed in kg metal per kg ore) of metals in ore for Chile is calculated with the quantity of ore milled and the corresponding production rate.
  Uncertainty: E
- Silver [natural resource, in ground]: 1.17643 kg; source Placer Dome Inc. 2003; lognormal variance with pedigree 0.0427, pedigree (2,4,5,3,1)
  42 ppm Ag and 1.1 ppm Au in ore; Calculated value: The recovery rate (proportion of valuable material physically recovered in the processing of ore) is taken into account in order to define the resource extraction. The average concentration (head grade, expressed in kg metal per kg ore) of metals in ore for Chile is calculated with the quantity of ore milled and the corresponding production rate.
  Uncertainty: E
- Water, unspecified natural origin [natural resource, in water]: 0.25667 m3; name water_UNO_input; source Placer Dome Inc. 2003; lognormal variance with pedigree 0.0427, pedigree (2,4,5,3,1)
  Calculated value: Data was obtained from Papua New Guinea mining, scaled by milled ore.
  Proxy: Water is approximated with 'Water, unspecified natural origin'.
  Further references:
  Classen M. et al. (2009) Life cycle inventories of metals, Part IX: Gold and Silver. Ecoinvent centre, Dubendorf.
  Calculated value: Data was obtained from Papua New Guinea mining, scaled by milled ore.
  Proxy: Water is approximated with 'Water, unspecified natural origin'.
  Further references:
  Classen M. et al. (2009) Life cycle inventories of metals, Part IX: Gold and Silver. Ecoinvent centre, Dubendorf.
  Uncertainty: E

## Emissions to nature
- Carbon dioxide, fossil [air, non-urban air or from high stacks]: 2.45973 kg; source Newmont 2005; lognormal variance with pedigree 0.0427, pedigree (2,4,5,3,1)
  Calculated value: CO2 emissions from explosives are calculated with the factor of the mines of Newmont (0.16 kg CO2 per kg explosive).
  Uncertainty: E
- Copper ion [air, non-urban air or from high stacks]: 2.26152e-5 kg; source Placer Dome Inc. 2003; lognormal variance with pedigree 0.6927, pedigree (2,4,5,3,1)
  Calculated value: Data was obtained from Swedish mining, scaled by milled ore.
  Further references:
  Classen M. et al. (2009) Life cycle inventories of metals, Part IX: Gold and Silver. Ecoinvent centre, Dubendorf.
  Uncertainty: E
- Lead II [air, non-urban air or from high stacks]: 7.35339e-6 kg; source Placer Dome Inc. 2003; lognormal variance with pedigree 0.6927, pedigree (2,4,5,3,1)
  (same comment as for Copper ion)
- Water [air, unspecified]: 0.0385004 m3; name water_to_air_unspecified; = (water_UNO_input*fraction_PW_to_air); lognormal variance with pedigree 0.0807, pedigree (2,2,5,1,1)
  Calculated value based on literature values and expert opinion. See comments in the parametres' comment field.
  property fraction, origin: fresh water 0; name fraction_origin_fresh_water
  property fraction, origin: salt water 0; name fraction_origin_salt_water
  property fraction, origin: unspecified 1; name fraction_origin_unspecified
- Zinc II [air, non-urban air or from high stacks]: 6.24339e-6 kg; source Placer Dome Inc. 2003; lognormal variance with pedigree 0.6927, pedigree (2,4,5,3,1)
  (same comment as for Copper ion)
- Arsenic ion [water, ocean]: 0.00110616 kg; source Placer Dome Inc. 2003; lognormal variance with pedigree 0.6927, pedigree (2,4,5,3,1)
  Calculated value: Data was obtained from Papua New Guinea mining, scaled by milled ore.
  Further references:
  Classen M. et al. (2009) Life cycle inventories of metals, Part IX: Gold and Silver. Ecoinvent centre, Dubendorf.
  Uncertainty: E
- Cadmium II [water, ocean]: 0.00517902 kg; source Placer Dome Inc. 2003; lognormal variance with pedigree 0.3527, pedigree (2,4,5,3,1)
  (same comment as for Arsenic ion)
- Copper ion [water, ocean]: 0.287036 kg; source Placer Dome Inc. 2003; lognormal variance with pedigree 0.3527, pedigree (2,4,5,3,1)
  (same comment as for Arsenic ion)
- Cyanide [water, ocean]: 0.465634 kg; source Placer Dome Inc. 2003; lognormal variance with pedigree 0.3527, pedigree (2,4,5,3,1)
  (same comment as for Arsenic ion)
- Lead II [water, ocean]: 0.00075792 kg; source Placer Dome Inc. 2003; lognormal variance with pedigree 0.6927, pedigree (2,4,5,3,1)
  (same comment as for Arsenic ion)
- Mercury II [water, ocean]: 1.175e-5 kg; source Placer Dome Inc. 2003; lognormal variance with pedigree 0.6927, pedigree (2,4,5,3,1)
  (same comment as for Arsenic ion)
- Nickel II [water, ocean]: 0.0687563 kg; source Placer Dome Inc. 2003; lognormal variance with pedigree 0.6927, pedigree (2,4,5,3,1)
  (same comment as for Arsenic ion)
- Water [water, unspecified]: 0.218169 m3; name water_to_water_unspecified; = water_UNO_input*(1-fraction_PW_to_air); lognormal variance with pedigree 0.0807, pedigree (2,2,5,1,1)
  (same comment as for Water)
  property carbon content, fossil 0; name C_content_fossil
  property carbon content, non-fossil 0; name C_content_non_fossil
  property fraction, origin: fresh water 0; name fraction_origin_fresh_water_Ww
  property fraction, origin: salt water 0; name fraction_origin_salt_water_Ww
  property fraction, origin: unspecified 1; name fraction_origin_unspecified_Ww
  property water in wet mass 1000 kg; name WWM
- Zinc II [water, ocean]: 1.82839 kg; source Placer Dome Inc. 2003; lognormal variance with pedigree 0.6927, pedigree (2,4,5,3,1)
  (same comment as for Arsenic ion)

## Sampling procedure
environmental report

## Extrapolations
See Geography
