# wood pellets, burned in stirling heat and power co-generation unit, 3kW electrical, future

Dataset: EcoSpold 2, unit process
Geography: CH
Time period: 2000-01-01 to 2022-12-31
Technology level: current
Classification: ISIC rev.4 ecoinvent: 3530:Steam and air conditioning supply
Classification: EcoSpold01Categories: biomass/cogeneration
Tags: with true value; ConvertedDataset
Scenario: Business-as-Usual
System model: Substitution, consequential, long-term
Generated by: Alex Primas
Published in: Primas A. 2007
Database: ecoinvent
isCopyrightProtected: true

## General comment
The multioutput-process 'wood pellets, burned in Stirling cogen unit 1kWe, future' delivers the coproducts 'heat, pellets, allocation exergy, at Stirling cogen unit 3kWe, future' and 'electricity, pellets, allocation exergy, at Stirling cogen unit 3kWe, future'. The exergy allocation is the allocation scheme suggested to be used within the ecoinvent database (e.g. in electricity mixes).
[This dataset was already contained in the ecoinvent database version 2. It was not individually updated during the transfer to ecoinvent version 3. Life Cycle Impact Assessment results may still have changed, as they are affected by changes in the supply chain, i.e. in other datasets. This dataset was generated following the ecoinvent quality guidelines for version 2. It may have been subject to central changes described in the ecoinvent version 3 change report (http://www.ecoinvent.org/database/ecoinvent-version-3/reports-of-changes/), and the results of the central updates were reviewed extensively. The changes added e.g. consistent water flows and other information throughout the database. The documentation of this dataset can be found in the ecoinvent reports of version 2, which are still available via the ecoinvent website. The change report linked above covers all central changes that were made during the conversion process.]

## Included activities end
The module includes fuel input, infrastructure, emissions to air, and working materials for operation.

## Geography
Wood pellet input modelled for Switzerland. Process applicable in central European conditions.

## Technology
Stirling motor for combustion of wood pellets. Power range: 1-3 kW electrical output, 4.5-10.5 kW heat output. Includes pellet storage volume for one day of operation. Electrical efficiency 23%, total efficiency 90%. Performance and lifetime according to expected future values for a serial product. Emission values based on similar processes and assumptions due to yet missing emission measurements.

## Reference product
- heat, future: 1 MJ; By-product classification allocatable product; CPC 17300: Steam and hot water
  production volume 0 MJ
    Unknown
    Future. Included in other supplies of electricity from co-generation of natural gas
  property Corresponding fuel use 2.45565 MJ; name fuel_use; = 8.21E-05*20040/0.67
    Lower heating value of the fuel input related to the heat/electricity output
  property exergy 0.1393 MJ; name exergy
    allocation factor for electricity (=1) vs. heat, where heat is calculated as the termodynamic mean temperature Tm = (Tfeed-Treturn)/ln(Tfeed/Treturn), relative to the application temperature (Tu, typically = 293 K), i.e. (Tm-Tu)/Tm
  property price 0.0106 EUR2005
    Average European district heat price from Ecoheatcool and Euroheat 2005-2006, Ecoheat Work package 1: The European heat market. Final report. 10.6 EUR/GJ i s the price of district heat. http://www.solarthermalworld.org/files/Ecoheatcool%20WP1%20Web.pdf?download
  property true value relation 0.1393; name true_value_relation
    property to calculate 'true value' from
  properties: carbon allocation 0 kg, carbon content 0, heating value, net 1 MJ

## Inputs from technosphere
- electricity, low voltage: -0.0933567 kWh
  production volume
    Unknown
    Calculated from the production volume of heat, future in proportion to the respective output amounts.
  properties: exergy 3.67712 MJ, price 0.109292 EUR2005
  note on exergy: allocation factor for electricity (=1) vs. heat, where heat is calculated as the termodynamic mean temperature Tm = (Tfeed-Treturn)/ln(Tfeed/Treturn), relative to the application temperature (Tu, typically = 293 K), i.e. (Tm-Tu)/Tm
- maintenance, stirling heat and power co-generation unit, 3kW electrical, wood pellet, future: 8.29851e-6 unit; lognormal variance with pedigree 0.354, pedigree (3,4,5,1,1)
  Uncertainty of maintenance cycle
  Uncertainty of maintenance cycle
- stirling heat and power co-generation unit, 3kW electrical, wood pellet, future: 5.92537e-7 unit; lognormal variance with pedigree 0.354, pedigree (3,4,5,1,1)
  Uncertainty of life time
  Uncertainty of life time
- storage, 650 l mini CHP plant: 5.8806e-7 unit; lognormal variance with pedigree 0.3512, pedigree (2,3,5,1,1)
  Uncertainty of life time
  This exchange has an activity link directly to the producing activity because the product is primarily consumed in the same geographical area where it is produced.
- wood ash mixture, pure: -0.000397015 kg; lognormal variance with pedigree 0.1106, pedigree (2,5,5,5,4)
  Calculated from pellet input
  Calculated from pellet input
  production volume
    Calculated from the production volume of heat, future in proportion to the respective output amounts.
  properties: carbon content, non-fossil 0.012, dry mass 1 kg, wet mass 1 kg
- wood pellet, measured as dry mass: 0.0796493 kg; lognormal variance with pedigree 0.0407, pedigree (2,2,5,1,1)
  Uncertainty on energy and water content, and bulk density
  Uncertainty on energy and water content, and bulk density
  properties: carbon content, non-fossil 0.494, dry mass 1 kg, heating value, net 13.38 MJ, water content 0.1, wet mass 1.1 kg
  note on carbon content, non-fossil: C content of dry mass is 0.494 kgC/kg dry wood (ecoinvent v2.2 report 9).

## Emissions to nature
- Acetaldehyde [air, urban air close to ground]: 9.10448e-8 kg; lognormal variance with pedigree 0.186, pedigree (4,5,5,1,4)
  Estimate based on data for wood boiler
- Ammonia [air, urban air close to ground]: 2.58209e-6 kg; lognormal variance with pedigree 0.156, pedigree (4,5,5,1,4)
  Estimate based on data for wood boiler
- Arsenic ion [air, urban air close to ground]: 1.49254e-9 kg; lognormal variance with pedigree 0.796, pedigree (4,5,5,1,4)
  Estimate based on data for wood boiler
- Benzene [air, urban air close to ground]: 1.35821e-6 kg; lognormal variance with pedigree 0.186, pedigree (4,5,5,1,4)
  Estimate based on data for wood boiler
- Benzene, ethyl- [air, urban air close to ground]: 4.47761e-8 kg; lognormal variance with pedigree 0.186, pedigree (4,5,5,1,4)
  Estimate based on data for wood boiler
- Benzene, hexachloro- [air, urban air close to ground]: 1.07463e-14 kg; lognormal variance with pedigree 0.446, pedigree (4,5,5,1,4)
  Estimate based on data for wood boiler
- Benzo(a)pyrene [air, urban air close to ground]: 7.46269e-10 kg; lognormal variance with pedigree 0.446, pedigree (4,5,5,1,4)
  Estimate based on data for wood boiler
- Bromine [air, urban air close to ground]: 8.95522e-8 kg; lognormal variance with pedigree 0.796, pedigree (4,5,5,1,4)
  Estimate based on data for wood boiler
- Cadmium II [air, urban air close to ground]: 1.04478e-9 kg; lognormal variance with pedigree 0.796, pedigree (4,5,5,1,4)
  Estimate based on data for wood boiler
- Calcium [air, urban air close to ground]: 8.73134e-6 kg; lognormal variance with pedigree 0.796, pedigree (4,5,5,1,4)
  Estimate based on data for wood boiler
- Carbon dioxide, non-fossil [air, urban air close to ground]: 0.144184 kg; lognormal variance with pedigree 0.0512, pedigree (2,5,5,5,1)
  Calculated from composition of wood pellets
- Carbon monoxide, non-fossil [air, urban air close to ground]: 4.77612e-5 kg; lognormal variance with pedigree 0.7626, pedigree (2,4,5,1,4)
  Estimate based on larger unit or other technology
- Chlorine [air, urban air close to ground]: 2.68657e-7 kg; lognormal variance with pedigree 0.186, pedigree (4,5,5,1,4)
  Estimate based on data for wood boiler
- Chromium III [air, urban air close to ground]: 5.91045e-9 kg; lognormal variance with pedigree 0.796, pedigree (4,5,5,1,4)
  Estimate based on data for wood boiler
- Chromium VI [air, urban air close to ground]: 5.97015e-11 kg; lognormal variance with pedigree 0.796, pedigree (4,5,5,1,4)
  Estimate based on data for wood boiler
- Copper ion [air, urban air close to ground]: 3.28358e-8 kg; lognormal variance with pedigree 0.796, pedigree (4,5,5,1,4)
  Estimate based on data for wood boiler
- Dinitrogen monoxide [air, urban air close to ground]: 4.47761e-6 kg; lognormal variance with pedigree 0.186, pedigree (4,5,5,1,4)
  Estimate based on data for wood boiler
- Dioxins, measured as 2,3,7,8-tetrachlorodibenzo-p-dioxin [air, urban air close to ground]: 4.62687e-14 kg; lognormal variance with pedigree 0.446, pedigree (4,5,5,1,4)
  Estimate based on data for wood boiler
- Fluorine [air, urban air close to ground]: 7.46269e-8 kg; lognormal variance with pedigree 0.186, pedigree (4,5,5,1,4)
  Estimate based on data for wood boiler
- Formaldehyde [air, urban air close to ground]: 1.9403e-7 kg; lognormal variance with pedigree 0.186, pedigree (4,5,5,1,4)
  Estimate based on data for wood boiler
- Hydrocarbons, aliphatic, alkanes, unspecified [air, urban air close to ground]: 1.35821e-6 kg; lognormal variance with pedigree 0.186, pedigree (4,5,5,1,4)
  Estimate based on data for wood boiler
- Hydrocarbons, aliphatic, unsaturated [air, urban air close to ground]: 4.62687e-6 kg; lognormal variance with pedigree 0.186, pedigree (4,5,5,1,4)
  Estimate based on data for wood boiler
- Lead II [air, urban air close to ground]: 3.73134e-8 kg; lognormal variance with pedigree 0.796, pedigree (4,5,5,1,4)
  Estimate based on data for wood boiler
- Magnesium [air, urban air close to ground]: 5.37313e-7 kg; lognormal variance with pedigree 0.796, pedigree (4,5,5,1,4)
  Estimate based on data for wood boiler
- Manganese II [air, urban air close to ground]: 2.53731e-7 kg; lognormal variance with pedigree 0.796, pedigree (4,5,5,1,4)
  Estimate based on data for wood boiler
- Mercury II [air, urban air close to ground]: 4.47761e-10 kg; lognormal variance with pedigree 0.796, pedigree (4,5,5,1,4)
  Estimate based on data for wood boiler
- Methane, non-fossil [air, urban air close to ground]: 5.97015e-7 kg; lognormal variance with pedigree 0.186, pedigree (4,5,5,1,4)
  Estimate based on data for wood boiler
- NMVOC, non-methane volatile organic compounds [air, urban air close to ground]: 3.43284e-6 kg; lognormal variance with pedigree 0.186, pedigree (4,5,5,1,4)
  Estimate based on data for wood boiler
- Nickel II [air, urban air close to ground]: 8.95522e-9 kg; lognormal variance with pedigree 0.796, pedigree (4,5,5,1,4)
  Estimate based on data for wood boiler
- Nitrogen oxides [air, urban air close to ground]: 0.000104478 kg; lognormal variance with pedigree 0.1626, pedigree (2,4,5,1,4)
  Estimate based on larger unit or other technology
- PAH, polycyclic aromatic hydrocarbons [air, urban air close to ground]: 1.65672e-8 kg; lognormal variance with pedigree 0.446, pedigree (4,5,5,1,4)
  Estimate based on data for wood boiler
- Particulate Matter, < 2.5 um [air, urban air close to ground]: 1.49254e-5 kg; lognormal variance with pedigree 0.44, pedigree (4,4,5,1,4)
  Estimate based on other technology
- Phenol, pentachloro- [air, urban air close to ground]: 1.20896e-11 kg; lognormal variance with pedigree 0.186, pedigree (4,5,5,1,4)
  Estimate based on data for wood boiler
- Phosphorus [air, urban air close to ground]: 4.47761e-7 kg; lognormal variance with pedigree 0.186, pedigree (4,5,5,1,4)
  Estimate based on data for wood boiler
- Potassium I [air, urban air close to ground]: 3.49254e-5 kg; lognormal variance with pedigree 0.796, pedigree (4,5,5,1,4)
  Estimate based on data for wood boiler
- Sodium [air, urban air close to ground]: 1.9403e-6 kg; lognormal variance with pedigree 0.796, pedigree (4,5,5,1,4)
  Estimate based on data for wood boiler
- Sulfur dioxide [air, urban air close to ground]: 3.73134e-6 kg; lognormal variance with pedigree 0.146, pedigree (4,5,5,1,4)
  Estimate based on data for wood boiler
- Toluene [air, urban air close to ground]: 4.47761e-7 kg; lognormal variance with pedigree 0.186, pedigree (4,5,5,1,4)
  Estimate based on data for wood boiler
- Zinc II [air, urban air close to ground]: 4.47761e-7 kg; lognormal variance with pedigree 0.796, pedigree (4,5,5,1,4)
  Estimate based on data for wood boiler
- m-Xylene [air, urban air close to ground]: 1.79104e-7 kg; lognormal variance with pedigree 0.186, pedigree (4,5,5,1,4)
  Estimate based on data for wood boiler

## Sampling procedure
Literature data and manufacturer information

## Review by Rolf Frischknecht 2007-09-25
passed
none

## Review by Emilia Moreno Ruiz 2012-04-16
calculation of fuel use property.
