# hake, capture by trawler and landing whole, fresh

Dataset: EcoSpold 2, unit process
Geography: RoW
Time period: 2010-01-01 to 2022-12-31
Technology level: current
Classification: ISIC rev.4 ecoinvent: 0311:Marine fishing
Scenario: Business-as-Usual
System model: Substitution, consequential, long-term
Generated by: Angel Avadi
Published in: Avadí, A. 2018
Database: ecoinvent
isCopyrightProtected: false

## General comment
This activity represents capture and landing of the demersal hake (Merluccius spp.) by mid-water and bottom trawling. The life cycle inventories were produced based on representative samples from Peru, Spain and Namibia. The activity may be used as proxy for other hake trawling activities.
System boundaries and relation between activities

## Included activities start
From the vessel use (including landing) and maintenance phases, including all upstream activities

## Allocation
A subdivision of the system between different species was assumed between hake and the other demersal or pelagic species landed. It should be noted that economic value of fish can be variable from a seasonal perspective.

## Geography
Miscellanea hake species caught and landed through trawling.

## Technology
Mid-water or bottom trawling, fish conservation with ice.

## Time period
Data corresponds to the landings-weighted average for operations in several hake fisheries between 2006 and 2011.

## Parameters
- annual landings per vessel: 1.68496e6 kg; name landings_vessel_year; triangular min 388941, mostLikely 1.26443e6, max 3.40151e6, pedigree (1,4,1,1,1)
  Amount of landings per vessel per year
- marine fuel use efficiency: 120 kg; name FUE; triangular min 72, mostLikely 120, max 168, pedigree (2,4,1,1,1)
  Amount of marine fuel consumed per landed unit of fish. Kilograms per tonne of landed fish.
- net calorific value: 42.7 MJ/kg; name net_cal_value; triangular min 41.6275, mostLikely 42.9346, max 43.5379, pedigree (3,5,4,5,5)
  Net calorific value of marine diesel oil (MDO)

## Reference product
- landed hake, fresh: 1 kg; name landed; source Angel Avadí 2017; By-product classification allocatable product; CPC 04241: Wild fish of Gadiformes, live, fresh or chilled; triangular min 0.982394, mostLikely 0.992958, max 1.02465, pedigree (1,1,1,1,1)
  Whole fresh chilled hake landed
  Uncertainty: Based on detailed IMARPE data on hake landings composition (2004-2013)
  production volume 8.57927e9 kg
    Landings for 2014 reported by FAO at a worldwide level for gadoids (hake, cods and haddocks)
  property ash content 0.013 kg; name hake_ash
    http://frida.fooddata.dk/ShowFood.php?foodid=475
  property carbon content, non-fossil 0.457294; name landed_C_content_non_fossil; = (1-hake_protein-landed_fat_content-hake_ash)*0.444+hake_protein*0.535+landed_fat_content*0.774
    Calculated from C_content = polysaccharids*0.444+protein*0.535+lipids*0.774 and polysaccharids = 1-(protein+lipids+ash)
  property dry mass 0.54945 kg; name landed_DM
  property energy content 4.3 MJ; name landed_energy_content
    Data for Peruvian hake
  property fat content 0.012; name landed_fat_content
    Data for Peruvian hake
  property price 1.17 EUR2005
    Literature value. Avadí, A., & Fréon, P. (2015). A set of sustainability performance indicators for seafood: Direct human consumption products from Peruvian anchoveta fisheries and freshwater aquaculture. Ecological Indicators, 48, 518–532. https://doi.org/10.1016/j.ecolind.2014.09.006
  property protein content 0.166; name hake_protein
    Data for Peruvian hake
  property water content 0.82; name landed_water_content
  properties: carbon allocation 0.25126 kg, carbon content 0.457294, water in wet mass 0.45055 kg, wet mass 1 kg

## Inputs from technosphere
- antifouling paint emissions: -0.00136341 kg; name antif; source Pierre Fréon 2014; triangular min -0.00150403, mostLikely -0.00139398, max -0.00119222, pedigree (3,3,1,5,1)
  Mass of solids from antifouling paint
  Uncertainty: Estimations on emissions and assumptions on the paint ingredients
  production volume
    Calculated from production volume of reference product using the relative outputs.
  properties: dry mass 1 kg, wet mass 1 kg
- demersal fish, fresh: -1.79344 kg; name bycatch; source Angel Avadí 2017; triangular min -2.3539, mostLikely -2.01763, max -1.00881, pedigree (3,1,1,5,1)
  Demersal biomass removed from ocean
  Uncertainty: Based on detailed IMARPE data on hake landings composition (2004-2013)
  production volume
    23% of hake landings
  property ash content 0.015 kg; name hakebc_ash
  property carbon content, non-fossil 0.466681; name bycatch_C_content_non_fossil; = (1-hakebc_protein-bycatch_fat_content-hakebc_ash)*0.444+hakebc_protein*0.535+bycatch_fat_content*0.774
  property dry mass 0.56397 kg; name bycatch_DM
  property energy content 3.914 MJ; name bycatch_energy_content
  property fat content 0.039; name bycatch_fat_content
  property protein content 0.181; name hakebc_protein
  property water content 0.77316; name bycatch_water_content
  properties: price 0.539258 EUR2005, wet mass 1 kg
  note on ash content: Ash content of fish is between 1-2% of the edible portion, http://www.fao.org/wairdocs/tan/x5916e/x5916e01.htm
  note on carbon content, non-fossil: Calculated from C_content = polysaccharids*0.444+protein*0.535+lipids*0.774 and polysaccharids = 1-(protein+lipids+ash)
  note on energy content: Average of 15 demersal fish species, http://www.fao.org/wairdocs/tan/x5916e/x5916e01.htm
- diesel, burned in fishing vessel: 49.2306 MJ; source Angel Avadí 2017; lognormal variance with pedigree 0.2106, pedigree (5,5,5,5,5)
  Combustion of diesel in marine engines. Average diesel use and combustion used for all energy needs onboard.
- lubricating oil: 0.00471706 kg; name oil; source Angel Avadí 2017; triangular min 0.00343059, mostLikely 0.00471706, max 0.00600352, pedigree (1,3,2,5,1)
  Lubricating oil for vessel engine
  Uncertainty: Monthly data for 9 vessels over 2006-2010
  properties: carbon content, fossil 0.75, dry mass 1 kg, heating value, net 40.2 MJ, wet mass 1 kg
  note on carbon content, fossil: Lubricating oil is produced from diesel. C-content/dry mass of fats and oils considered 75%, from: ecoinvent v2.2 report, n 15a, pg 40
  note on heating value, net: Literature value, Source: IPCC 2006, 2006 IPCC Guidelines for National Greenhouse Gas Inventories, Prepared by the National Greenhouse Gas Inventories Programme, Eggleston H.S., Buendia L., Miwa K., Ngara T. and Tanabe K. (eds). Published: IGES, Japan
- operation, reefer, freezing: 1.04125 kg*day; source Angel Avadí 2017; triangular min 0.937122, mostLikely 1.04125, max 1.14537, pedigree (4,3,2,1,1)
  Proxy for ice used in fish preservation: 0.6 kg ice/kg fish
  Uncertainty: Uncertainty data unavailable, 10% difference considered
- trawler maintenance, steel: 0.0129032 kg; = (26439000/(26439000+4807000+41500000))*28.4723274811842+(4807000/(26439000+4807000+41500000))*14.7342678356749+(41500000/(26439000+4807000+41500000))*1.99806800671747; source Angel Avadí 2017; lognormal variance with pedigree 0.0512, pedigree (4,3,5,5,1)
  Maintenance of a trawler, per 1000 kg of light ship weight (LSW) over 35 years lifetime. Regressions based on mainly primary data were created to relate the weight of each inventory item to a trawler's LSW. The list of inventory items (granularity) contribute >95% of environmental impacts, as described in the reference publication.
- trawler, steel: 0.0129032 kg; = (26439000/(26439000+4807000+41500000))*28.4723274811842+(4807000/(26439000+4807000+41500000))*14.7342678356749+(41500000/(26439000+4807000+41500000))*1.99806800671747; source Angel Avadí 2017; lognormal variance with pedigree 0.51, pedigree (5,5,5,5,5)
  Construction of a trawler, per 1000 kg of light ship weight (LSW). Regressions based on mainly primary data were created to relate the weight of each inventory item to a trawler's LSW. The list of inventory items (granularity) contribute >95% of environmental impacts, as described in the reference publication.
  properties: lifetime 30 year, lifetime capacity [h] 48000 hour
- waste mineral oil: -4.41812e-5, -0.00467287 kg (2 suppliers, which the file names only by identifier); sum of these -0.00471706 kg; = oil; source Avadí, A. 2018; lognormal variance with pedigree 0.0586, pedigree (4,3,4,5,1)
  Spent lubricating oil treated inland
  production volume
    Calculated from production volume of reference product using the relative outputs.
  properties: carbon content, fossil 0.864444, dry mass 0.9 kg, heating value, net 34.7 MJ, water content 0.111111, wet mass 1 kg
  note on carbon content, fossil: Tab A.6, ecoinvent v2.2 report 13_I. C content has been calculated after data in the tables, and then referred to 1 kg DM
  note on heating value, net: Value taken from the general comment of the treatment dataset.

## Inputs from nature
- Fish, demersal, in ocean [natural resource, biotic]: 1.14074 kg; source Angel Avadí 2017; lognormal variance with pedigree 0.0512, pedigree (4,3,5,5,1)
  Hake (TL = 4.4 ± 0.6) biomass removed from ocean
  property ash content 0.015 kg; name fishd_ash
  property fat content 0.039; name fishd_fat
  property protein content 0.181; name fishd_protein
- Fish, pelagic, in ocean [natural resource, biotic]: 2.02383 kg; lognormal variance with pedigree 0.0512, pedigree (4,3,5,5,1)
  Pelagic fish in ocean, resource extracted by fisheries
  property ash content 0.015 kg; name fishp_ash
  property carbon content, non-fossil 0.476729; name discardsp_C_content_non_fossil_1; = (1-fishp_protein-fishp_fat-fishp_ash)*0.444+fishp_protein*0.535+fishp_fat*0.774
  property dry mass 0.5702 kg; name discardsp_DM_1
  property energy content 4.049 MJ; name discardsp_energy_content_1
  property fat content 0.07; name fishp_fat
  property protein content 0.179; name fishp_protein
  property water content 0.75377; name discardsp_water_content_1
  property water in wet mass 0.4298 kg; name discardsp_WWM_1
  property wet mass 1 kg; name discardsp_WM_1

## Emissions to nature
- Methane, chlorodifluoro-, HCFC-22 [air, non-urban air or from high stacks]: 0.00104661 kg; lognormal variance with pedigree 0.0512, pedigree (4,3,5,5,1)
  R22 cooling agent emissions.
- Discarded fish, demersal, to ocean [water, ocean]: 0.0970888 kg; name discards; source Angel Avadí 2017; triangular min 0.0647258, mostLikely 0.0970888, max 0.129452, pedigree (3,3,2,1,1)
  Fish caught and discarded to ocean
  Uncertainty: Data based on expert opinions, as no detailed records exist
  property ash content 0.015 kg; name discardsd_ash
  property carbon content, non-fossil 0.466681; name discards_C_content_non_fossil; = (1-discardsd_protein-discards_fat_content-discardsd_ash)*0.444+discardsd_protein*0.535+discards_fat_content*0.774
  property dry mass 0.56397 kg; name discards_DM
  property energy content 3.914 MJ; name discards_energy_content
  property fat content 0.039; name discards_fat_content
  property protein content 0.181; name discardsd_protein
  property water content 0.77316; name discards_water_content
  property water in wet mass 0.43603 kg; name discards_WWM
  property wet mass 1 kg; name discards_WM
- Discarded fish, pelagic, to ocean [water, ocean]: 0.274039 kg; lognormal variance with pedigree 0.0512, pedigree (4,3,5,5,1)
  Pelagic fish discarded by fisheries
  property ash content 0.015 kg; name discardsp_ash
  property carbon content, non-fossil 0.476729; name discardsp_C_content_non_fossil; = (1-discardsp_protein-discardsp_fat-discardsp_ash)*0.444+discardsp_protein*0.535+discardsp_fat*0.774
  property dry mass 0.5702 kg; name discardsp_DM
  property energy content 4.049 MJ; name discardsp_energy_content
  property fat content 0.07; name discardsp_fat
  property protein content 0.179; name discardsp_protein
  property water content 0.75377; name discardsp_water_content
  property water in wet mass 0.4298 kg; name discardsp_WWM
  property wet mass 1 kg; name discardsp_WM

## Extrapolations
The dataset is an average from the regional datasets of Namibia, Peru and Spain. The relative (to their sum) production volume is used as weighting key to extract a weighted average Global dataset. The weights used are the following: 36%, 7% and 57% for Spain, Namibia and Peru respectively.
