# electrorefining of copper, anode

Dataset: EcoSpold 2, unit process
Geography: GLO
Time period: 1994-01-01 to 2022-12-31
Technology level: current
Classification: ISIC rev.4 ecoinvent: 2420:Manufacture of basic precious and other non-ferrous metals
Synonyms: electrolysis; hydrometallurgy; electrolytic refining; electrwinning
Scenario: Business-as-Usual
System model: Substitution, consequential, long-term
Share of production covered: 54 %
Generated by: David Turner
Published in: Turner, D. A. 2020
Database: ecoinvent
isCopyrightProtected: true

## General comment
For the electrorefining of copper anodes to produce high grade copper cathodes, globally.
Background: Metals are produced as part of a complex, highly interconnected and interdependent system, with many desirable but scarce/critical metals recovered as by-products during the production of one or more ‘host’ metal(s). Copper is one of the world’s major mineral commodities and is mined from heterogeneous sulfide or oxide mineral deposits in countries worldwide. Copper sulfide deposits, such as those of the porphyry or massive sulphide type, contain numerous other valuable minerals, which are desirable to society. Copper is mined & beneficiated to produce a copper sulfide concentrate, as well as other by-product concentrates (e.g. molybdenite), which are sold to smelters. Copper sulfide concentrates are smelted to produce the intermediate product, copper anode. This is then sold to refineries, where it is electrorefined to produce copper cathode, which is sold to fabricators. The by-product of copper electrorefining is anode slime, which contains various important by-product metals (principally gold, silver, selenium & tellurium) and is sold to precious metal recovery plants for further processing to recover the valuable metals.
Modelling approach: Amounts of exchanges to the environment and from the technosphere were calculated based on the LCI process model for “copper production, primary” described in Classen et al. (2009) for ecoinvent v2.1. The amounts of by products from the process were calculated through a global material flow analysis of primary copper production. Further information is provided in the accompanying documentation (see Turner & Hischier, 2020).
References
Classen, M., Althaus, H.-J., Blaser, S., Scharnhost, W., Tuchschmid, M., Jungbluth, N., & Emmenegger, M. F. (2009). Life cycle inventories of metals. Final report, ecoinvent data v2.1, No. 10. Dübendorf, Switzerland.
Turner & Hischier (2020). Life cycle inventories of pyrometallurgical copper production and anode slime processing. Empa, St. Gallen, Switzerland.

## Included activities start
Upon delivery of copper anode.

## Included activities end
The electrorefining of copper anode and the production of copper cathode.

## Allocation
No allocation is applied.

## Geography
This module is valid for the whole corresponding region.

## Technology
Based on typical current technology.

## Time period
Production volumes are representative of the situation in 2015 but are considered valid until the end of 2019. Data sources for the inventory model based on Classen et al. (2009).
References
Classen, M., Althaus, H.-J., Blaser, S., Scharnhost, W., Tuchschmid, M., Jungbluth, N., & Emmenegger, M. F. (2009). Life cycle inventories of metals. Final report, ecoinvent data v2.1, No. 10. Dübendorf, Switzerland.

## Reference product
- copper, cathode: 1 kg; name cathode_amount; By-product classification allocatable product; CPC 41413: Refined copper and copper alloys, unwrought; master alloys of copper; CAS 7440-50-8
  production volume 1.43e10 kg
    world copper refinery production (kg, gross weight) in 2015, from 'primary' and 'other' production only. Data source: USGS Minerals Yearbook 2015
  property copper content 1; name copper_content_cathode
    copper content on a dry matter basis
  property price 3.57105 EUR2005
    Price calculated as 5-year market average (2015-2019; USD/kg; USGS [2020]) and converted to EUR2005 (USD2019/EUR2005 exchange rate: 0.62; Official Data Foundation [2020] and Macrotrends [2020]).
    References:
    Official Data Foundation (2020). Inflation Calculator [Online]. Available from: https://www.officialdata.org/us/inflation/2005?endYear=2019&amount=1 [Accessed 28/07/2020]
    USGS (2020). Mineral Commodity Summaries 2020 [Online]. Available from: https://pubs.usgs.gov/periodicals/mcs2020/mcs2020.pdf [Accessed 28/07/2020]
    Macrotrends (2020). Euro Dollar Exchange Rate (EUR USD) - Historical Chart [Online]. Available from: https://www.macrotrends.net/2548/euro-dollar-exchange-rate-historical-chart [Accessed 28/07/2020]
  properties: carbon allocation 0 kg, carbon content 0, carbon content, fossil 0, carbon content, non-fossil 0, dry mass 1 kg, water content 0, water in wet mass 0 kg, wet mass 1 kg

## Inputs from technosphere
- anode slime from electrorefining of copper, anode: -0.003 kg; name BP_anode; normal variance with pedigree 0.0052, pedigree (2,3,3,5,1)
  Amount calculated through mass balance of the copper production chain. Source: Turner, D. A. & Hischier, R. (2020). Life cycle inventories of pyrometallurgical copper production and anode slime processing. Empa, St. Gallen, Switzerland.
  production volume
    Calculated from production volume of reference product using the relative outputs.
  properties: copper content 0.176063, dry mass 1 kg, gold content 0.0025, price 5.30042 EUR2005, selenium content 0.064214, silver content 0.0901024, tellurium content 0.00431524, wet mass 1 kg
- chemical factory, organics: 2.80559e-10 unit; lognormal variance with pedigree 0.3521, pedigree (3,2,5,5,3)
  Source: Classen, M., Althaus, H.-J., Blaser, S., Scharnhost, W., Tuchschmid, M., Jungbluth, N., & Emmenegger, M. F. (2009). Life cycle inventories of metals. Final report, ecoinvent data v2.1, No. 10. Dübendorf, Switzerland.
- conveyor belt: 1.47294e-5 m; lognormal variance with pedigree 0.3521, pedigree (3,2,5,5,3)
  (same comment as for chemical factory, organics)
- copper, anode: 0.996965 kg; name anode_amount; = 1.003-electrolyte_amount; normal variance with pedigree 0.005, pedigree (3,3,2,5,1)
  (same comment as for anode slime from electrorefining of copper, anode)
  property copper content 0.992; name copper_content_anode
  properties: dry mass 1 kg, wet mass 1 kg
- copper-rich materials: 0.00497572 kg; = cathode_amount * copper_content_cathode - electrolyte_amount * copper_content_electrolyte - anode_amount * copper_content_anode; lognormal variance with pedigree 0.2106, pedigree (5,5,5,5,5)
  Calculated Value. Difference in copper between output of "copper, cathode" and inputs of "copper, anod"e and "electrolyte, copper-rich"
  properties: copper content 1, dry mass 1 kg, wet mass 1 kg
- diesel, burned in building machine: 2.24 MJ; lognormal variance with pedigree 0.0513, pedigree (2,2,5,5,3)
  (same comment as for chemical factory, organics)
  properties: heating value, net 1 MJ
- electricity, high voltage: 2.93 kWh; lognormal variance with pedigree 0.0439, pedigree (2,2,5,5,2)
  (same comment as for chemical factory, organics)
- electrolyte, copper-rich: 0.00603524 kg; name electrolyte_amount; lognormal variance with pedigree 0.0099, pedigree (2,2,4,1,2)
  Input added to reflect electrolyte produced in cobalt production that is reported to be sent to copper refining.
  properties: copper content 1, dry mass 1 kg, water content 0.256716, wet mass 1.25672 kg

## Inputs from nature
- Transformation, from unspecified [natural resource, land]: 1.12429e-5 m2; lognormal variance with pedigree 0.1721, pedigree (3,2,5,5,3)
  (same comment as for chemical factory, organics)
- Transformation, to mineral extraction site [natural resource, land]: 1.12429e-5 m2; lognormal variance with pedigree 0.1721, pedigree (3,2,5,5,3)
  (same comment as for chemical factory, organics)

## Emissions to nature
- Heat, waste [air, non-urban air or from high stacks]: 1.77 MJ; lognormal variance with pedigree 0.0907, pedigree (2,2,5,5,3)
  (same comment as for chemical factory, organics)

## Sampling procedure
All exchanges to the environment and from the technosphere calculated using the life cycle inventory model presented in Classen et al. (2009) (ecoinvent v.2.1). The amounts and composition (exchange properties) of 'copper, cathode' and 'anode slime, from copper cathode production, electrolysis process' were estimated based on a global material flow analysis of copper production. For more information, please refer to the accompanying documentation (see Turner & Hischier, 2020).

References
Classen, M., Althaus, H.-J., Blaser, S., Scharnhost, W., Tuchschmid, M., Jungbluth, N., & Emmenegger, M. F. (2009). Life cycle inventories of metals. Final report, ecoinvent data v2.1, No. 10. Dübendorf, Switzerland.
Turner & Hischier (2020). Life cycle inventories of pyrometallurgical copper production and anode slime processing. Empa, St. Gallen, Switzerland.

## Extrapolations
see Geography and Technology comments. This dataset has been copied from an original dataset covering the geography RER. The uncertainty has been adjusted accordingly.
