# natural gas, burned in solid oxide fuel cell, with micro gas turbine, 180kWe, future

Dataset: EcoSpold 2, unit process
Geography: CH
Time period: 2000-01-01 to 2022-12-31
Technology level: current
Classification: ISIC rev.4 ecoinvent: 3510:Electric power generation, transmission and distribution
Classification: EcoSpold01Categories: natural gas/cogeneration
Synonyms: SOFC gas turbine hybrid; SOFC Gasturbinen Hybridsystem; solid oxide fuel cell hybrid cycle power system; Festoxid Brennstoffzellen Gasturbinen Hybridsystem
Tags: with true value; ConvertedDataset
Scenario: Business-as-Usual
System model: Substitution, consequential, long-term
Generated by: Alex Primas
Published in: Primas A. 2007
Database: ecoinvent
isCopyrightProtected: true

## General comment
The multioutput-process 'natural gas, burned in SOFC-GT fuel cell 180kWe delivers the coproducts 'heat, natural gas, allocation exergy, at SOFC-GT fuel cell 180kWe' and 'electricity, natural gas, allocation exergy, at SOFC-GT fuel cell 180kWe'. The exergy allocation is the allocation scheme suggested to be used within the ecoinvent database (e.g. in electricity mixes).
[This dataset was already contained in the ecoinvent database version 2. It was not individually updated during the transfer to ecoinvent version 3. Life Cycle Impact Assessment results may still have changed, as they are affected by changes in the supply chain, i.e. in other datasets. This dataset was generated following the ecoinvent quality guidelines for version 2. It may have been subject to central changes described in the ecoinvent version 3 change report (http://www.ecoinvent.org/database/ecoinvent-version-3/reports-of-changes/), and the results of the central updates were reviewed extensively. The changes added e.g. consistent water flows and other information throughout the database. The documentation of this dataset can be found in the ecoinvent reports of version 2, which are still available via the ecoinvent website. The change report linked above covers all central changes that were made during the conversion process.]

## Included activities end
The module includes fuel input, infrastructure, emissions to air, and working materials for operation.

## Geography
Natural gas input modelled for Switzerland. Process applicable in central European conditions.

## Technology
Hybrid system combining a 125 kWe solid oxide fuel cell (SOFC) with tubular stack design and a 55kWe micro gas turbine. For central cogeneration use. Performance, stack lifetime and catalyst use according to expected future values for a serial product. Operation with connection to low pressure gas network. Electrical efficiency 58%, total efficiency 80%. Operation as base load engine with low partial load hours.

## Parameters
- fraction, process water, to air: 0.15 dimensionless; name fraction_PW_to_air; lognormal variance with pedigree 0.092025, pedigree (4,4,3,2,4)
  Literature value. In case when no industry/process specific data are available, default evaporation fraction value is used. This value is 15% and is based on literature (Statistics Canada, 2007 & Shaffer, K.H., 2008, Consumptive water use in the Great Lakes Basin, USGS & Shiklomanov, 2003, World Water Resources at the Beginning of the 21st Century) and has been approved by an expert.
- fraction, tap water, to air: 0.15 dimensionless; name fraction_TW_to_air; = fraction_PW_to_air; lognormal variance with pedigree 0.092025, pedigree (4,4,3,2,4)
  Calculated value. See comment in the other parametres present in this dataset. Tap water is considered to be always used as process water, thus process water fractions to air are applied to all tap water input flows to calculate the amount of water consumed in the processes.

## Reference product
- heat, future: 1 MJ; By-product classification allocatable product; CPC 17300: Steam and hot water
  production volume 0 MJ
    Unknown
    Future. Included in other supplies of electricity from co-generation of natural gas
  property Corresponding fuel use 4.14125 MJ; name fuel_use; = 0.025641*35.532/0.22
    Lower heating value of the fuel input related to the heat/electricity output
  property exergy 0.169678 MJ
    allocation factor for electricity (=1) vs. heat, where heat is calculated as the termodynamic mean temperature Tm = (Tfeed-Treturn)/ln(Tfeed/Treturn), relative to the application temperature (Tu, typically = 293 K), i.e. (Tm-Tu)/Tm
  property price 0.0106 EUR2005
    Average European district heat price from Ecoheatcool and Euroheat 2005-2006, Ecoheat Work package 1: The European heat market. Final report. 10.6 EUR/GJ i s the price of district heat. http://www.solarthermalworld.org/files/Ecoheatcool%20WP1%20Web.pdf?download
  properties: carbon allocation 0 kg, carbon content 0, heating value, net 1 MJ, true value relation 0.169678

## Inputs from technosphere
- electricity, low voltage: -0.732318 kWh
  production volume
    Unknown
    Calculated from the production volume of heat, future in proportion to the respective output amounts.
  properties: exergy 3.6 MJ, price 0.107 EUR2005
  note on exergy: allocation factor for electricity (=1) vs. heat, where heat is calculated as the termodynamic mean temperature Tm = (Tfeed-Treturn)/ln(Tfeed/Treturn), relative to the application temperature (Tu, typically = 293 K), i.e. (Tm-Tu)/Tm
- fuel cell, solid oxide, with micro gas turbine, 180kW electrical, future: 6.27273e-8 unit; lognormal variance with pedigree 0.3512, pedigree (2,3,5,1,1)
  Uncertainty of life time
  This exchange has an activity link directly to the producing activity because the product is primarily consumed in the same geographical area where it is produced.
- lubricating oil: 7.72727e-7 kg; lognormal variance with pedigree 0.0426, pedigree (3,3,5,1,1)
  Company data for 100kWel micro gas turbine
  Company data for 100kWel micro gas turbine
  properties: carbon content, fossil 0.75, dry mass 1 kg, heating value, net 40.2 MJ, wet mass 1 kg
  note on carbon content, fossil: Lubricating oil is produced from diesel. C-content/dry mass of fats and oils considered 75%, from: ecoinvent v2.2 report, n 15a, pg 40
  note on heating value, net: Literature value, Source: IPCC 2006, 2006 IPCC Guidelines for National Greenhouse Gas Inventories, Prepared by the National Greenhouse Gas Inventories Programme, Eggleston H.S., Buendia L., Miwa K., Ngara T. and Tanabe K. (eds). Published: IGES, Japan
- maintenance, solid oxide fuel cell, with micro gas turbine, 180kW electrical, future: 5.63636e-7 unit; lognormal variance with pedigree 0.0412, pedigree (2,3,5,1,1)
  Uncertainty of maintenance cycle
  This exchange has an activity link directly to the producing activity because the product is primarily consumed in the same geographical area where it is produced.
- natural gas, low pressure: 0.11655 m3; lognormal variance with pedigree 0.2106, pedigree (5,5,5,5,5)
  Input
  Input
  properties: carbon content, fossil 0.695187, dry mass 1 kg, heating value, gross 39 MJ, heating value, net 36 MJ, wet mass 1 kg
  note on carbon content, fossil: C content considered the same as in high pressure (consumption mix)
  note on heating value, net: Literature value, Source: Christoph Meili;Niels Jungbluth;Maresa Bussa (2021) Life cycle inventories of crude oil and natural gas extraction. ESU-services Ltd. commissioned by BAFU & VSG, Schaffhausen, Switzerland, http://esu-services.ch/data/public-lci-reports/
- storage, 10'000 l: 4.46818e-8 unit; lognormal variance with pedigree 0.3512, pedigree (2,3,5,1,1)
  Uncertainty of life time
  Uncertainty of life time;activityLink introduced to establish a direct link to the corresponding regional supply of this product
- tap water: 9.54545e-5 kg; name tap_water_input; lognormal variance with pedigree 0.054025, pedigree (3,4,5,2,1)
  Company data
  Company data
  properties: carbon content, fossil 0.00178991, dry mass 0.000337476 kg, water content 2962.17, wet mass 1 kg
  note on carbon content, fossil: Bicarbonate content is 2.93 mol/m3. CO2 content is 0.1 mol/m3 (ecoinvent v2.2 report 8, Tab 93.1).
- waste mineral oil: -8.5e-7 kg; lognormal variance with pedigree 0.0288, pedigree (4,3,2,1,1)
  Calculated from oil input
  Calculated from oil input
  production volume
    Calculated from the production volume of heat, future in proportion to the respective output amounts.
  properties: carbon content, fossil 0.864444, dry mass 0.9 kg, heating value, net 34.7 MJ, water content 0.111111, wet mass 1 kg
  note on carbon content, fossil: Tab A.6, ecoinvent v2.2 report 13_I. C content has been calculated after data in the tables, and then referred to 1 kg DM
  note on heating value, net: Value taken from the general comment of the treatment dataset.

## Emissions to nature
- Carbon dioxide, fossil [air, urban air close to ground]: 0.254545 kg; lognormal variance with pedigree 0.0512, pedigree (2,5,5,5,1)
  Composition of natural gas
- Carbon monoxide, fossil [air, urban air close to ground]: 7.72727e-6 kg; lognormal variance with pedigree 0.6912, pedigree (2,3,5,1,1)
  Estimate based on fuel cell references
- Methane, fossil [air, urban air close to ground]: 1.81818e-5 kg; lognormal variance with pedigree 0.1086, pedigree (4,3,5,1,1)
  Estimate based on fuel cell references
- NMVOC, non-methane volatile organic compounds [air, urban air close to ground]: 3.18182e-6 kg; lognormal variance with pedigree 0.0986, pedigree (4,3,5,1,1)
  Estimate based on fuel cell references
- Nitrogen oxides [air, urban air close to ground]: 5e-5 kg; lognormal variance with pedigree 0.116, pedigree (4,5,5,1,1)
  Estimate based on fuel cell and micro gas turbine references
- Sulfur dioxide [air, urban air close to ground]: 2.5e-6 kg; lognormal variance with pedigree 0.0512, pedigree (2,5,5,5,1)
  Composition of natural gas
- Water [air, unspecified]: 1.43182e-8 m3; name water_to_air_unspecified; = (tap_water_input/1000*fraction_TW_to_air); lognormal variance with pedigree 0.0807, pedigree (2,2,5,1,1)
  Calculated value based on literature values and expert opinion. See comments in the parametres' comment field.
  property fraction, origin: fresh water 1; name fraction_origin_fresh_water
  property fraction, origin: salt water 0; name fraction_origin_salt_water
  property fraction, origin: unspecified 0; name fraction_origin_unspecified
- Water [water, unspecified]: 8.11364e-8 m3; name water_to_water_unspecified; = (tap_water_input/1000)*(1-fraction_TW_to_air); lognormal variance with pedigree 0.0807, pedigree (2,2,5,1,1)
  (same comment as for Water)
  property carbon content, fossil 0; name C_content_fossil
  property carbon content, non-fossil 0; name C_content_non_fossil
  property fraction, origin: fresh water 1; name fraction_origin_fresh_water_Ww
  property fraction, origin: salt water 0; name fraction_origin_salt_water_Ww
  property fraction, origin: unspecified 0; name fraction_origin_unspecified_Ww
  property water in wet mass 1000 kg; name WWM

## Sampling procedure
Literature data and manufacturer information

## Review by Rolf Frischknecht 2007-08-13
passed
none

## Review by Emilia Moreno Ruiz 2012-04-16
calculation of fuel use property.
