# ethanol production from wood

Dataset: EcoSpold 2, unit process
Geography: SE
Time period: 2000-01-01 to 2022-12-31
Technology level: current
Classification: EcoSpold01Categories: biomass/fuels
Classification: ISIC rev.4 ecoinvent: 2011:Manufacture of basic chemicals
Tags: ConvertedDataset
Scenario: Business-as-Usual
System model: Substitution, consequential, long-term
Share of production covered: 0 %
Generated by: Sybille Büsser
Published in: Hischier, R. 2010
Database: ecoinvent
isCopyrightProtected: true

## General comment
Inventory refers to the production of 1 kg hydrated ethanol 95% (dry basis, i.e. 1.05 kg hydrated ethanol 95% wet basis), respectively 1 kWh of electricity from wood (u=70%, i.e. 59% dry matter). The multioutput-process 'wood, in distillery' delivers the co-products 'ethanol, 95% in H2O, from wood, at distillery' and 'electricity, from wood, at distillery'. Economic allocation with allocation factor for common stages of 99.7% to ethanol.
[This dataset was already contained in the ecoinvent database version 2. It was not individually updated during the transfer to ecoinvent version 3. Life Cycle Impact Assessment results may still have changed, as they are affected by changes in the supply chain, i.e. in other datasets. This dataset was generated following the ecoinvent quality guidelines for version 2. It may have been subject to central changes described in the ecoinvent version 3 change report (http://www.ecoinvent.org/database/ecoinvent-version-3/reports-of-changes/), and the results of the central updates were reviewed extensively. The changes added e.g. consistent water flows and other information throughout the database. The documentation of this dataset can be found in the ecoinvent reports of version 2, which are still available via the ecoinvent website. The change report linked above covers all central changes that were made during the conversion process.]

## Included activities end
This dataset includes the transport of wood from the forest to the distillery, and the processing of wood (u=70%) to hydrated ethanol (95%) and electricity. System boundary is at the distillery. Dehydration to anhydrous ethanol is not included. Process heat and power supply is ensured by the combustion of unconverted solids.

## Geography
Data is adapted to Swedish conditions from NREL ethanol process design from yellow poplar (1999) and information from alcosuisse

## Technology
Ethanol is produced by dilute acid pre-hydrolysis and simultaneous saccharification and co-fermentation (SSCF) of lignocellulosic biomass. Process heat and power supply is ensured by the combustion of unconverted solids. Excess electricity is exported to the power grid.

## Parameters
- fraction, cooling water, cooling pond system, to air: 0.032 dimensionless; name fraction_CW_CP_to_air; lognormal variance with pedigree 0.0413, pedigree (2,3,1,3,1)
  Calculated based on literature value (Scown, C.D., 2011, Water Footprint of U.S. Transportation Fuels and supplying information of the article) (Vionnet, S., Quantis Water Database - Technical Report, 2012).
- fraction, cooling water, once-through system, to air: 0.004 dimensionless; name fraction_CW_OT_to_air; lognormal variance with pedigree 0.0413, pedigree (2,3,1,3,1)
  (same comment as for fraction, cooling water, cooling pond system, to air)
- fraction, cooling water, recirculating system, to air: 0.771 dimensionless; name fraction_CW_R_to_air; lognormal variance with pedigree 0.0413, pedigree (2,3,1,3,1)
  (same comment as for fraction, cooling water, cooling pond system, to air)
- fraction, cooling water, to air: 0.64 dimensionless; name fraction_CW_to_air; lognormal variance with pedigree 0.092025, pedigree (4,4,3,2,4)
  Calculated value based on literature value (Schonoor, 2008) (Vionnet, S., Quantis Water Database - Technical Report, 2012).
- fraction, process water, to air: 0.930167 dimensionless; name fraction_PW_to_air; lognormal variance with pedigree 0.092025, pedigree (4,4,3,2,4)
  Calculated value based on data from literature (Vionnet, S., Quantis Water Database - Technical Report, 2012).
- fraction, tap water, to air: 0.930167 dimensionless; name fraction_TW_to_air; = fraction_PW_to_air; lognormal variance with pedigree 0.092025, pedigree (4,4,3,2,4)
  Calculated value. See comment in the other parametres present in this dataset. Tap water is considered to be always used as process water, thus process water fractions to air are applied to all tap water input flows to calculate the amount of water consumed in the processes.
- fraction, water, decarbonised, to air: 0.64 dimensionless; name fraction_WDC_to_air; = fraction_CW_to_air; lognormal variance with pedigree 0.092025, pedigree (4,4,3,2,4)
  Calculated value. See comments in the other parametres present in this dataset. Decarbonised water is considered to be always used as cooling water, thus cooling water fractions to air are applied to all carbonised water input flows to calculate the amount of water consumed in the processes.

## Reference product
- ethanol, without water, in 95% solution state, from fermentation: 1 kg; name RP_amount_1; By-product classification allocatable product; CPC 35491: Biodiesel; CAS 64-17-5
  EcoSpold01Location=SE
  production volume 1.106e7 kg
    Calculated based on literature values.
    Density of bioethanol: 0.79 kg/l (ecoinvent v2 report no. 17).
    70 Ml is the annual production of bioethanol in Sweden in 2007 (http://www.biofuels-platform.ch/en/infos/production.php). 20% of this bio-ethanol is produced from wood (USDA, 2007, Biofuels Annual - Sweden, http://gain.fas.usda.gov/Recent%20GAIN%20Publications/Biofuels%20Annual_Stockholm_Sweden_6-24-2009.pdf).
  property heating value, net 28.1 MJ
    Based on literature, page 275, Report 17: Jungbluth, N., Chudacoff, M., Dauriat, A., Dinkel, F., Doka, G., Faist Emmenegger, M., Gnansounou, E., Kljun, N., Schleiss, K., Spielmann, M., Stettler, C., Sutter, J. 2007: Life Cycle Inventories of Bioenergy. ecoinvent report No. 17, Swiss Centre for Life Cycle Inventories, Dübendorf, CH.
  property price 0.324 EUR2005
    Temporary price data. Calculated as 90% of purchasers price based on: 2005 prices from FAPRI2007, 2009. Agricultural outlook. (http://www.fapri.missouri.edu/outreach/publications/ag_outlook.asp?current_page=outreach; accessed 22/06/10). Unit conversion from US gallon to kg - 1 gallon = 3.7856 liter * 0.789 kg/liter (ethanol density) = 2.9868 kg
  properties: carbon allocation 0.521739 kg, carbon content 0.521739, carbon content, fossil 0, carbon content, non-fossil 0.521739, dry mass 1 kg, water content 0, water in wet mass 0 kg, wet mass 1 kg

## Inputs from technosphere
- ammonia, anhydrous, liquid: 0.0660858 kg; lognormal variance with pedigree 0.051225
  EcoSpold01Location=CH
  (2,3,1,2,1,5,BU:1.05); etha+ project Alcosuisse, SSCF technology from NREL
  Uncertainty: etha+ project Alcosuisse, SSCF technology from NREL
  properties: dry mass 1 kg, wet mass 1 kg
- ammonium sulfate: 0.00118447 kg; lognormal variance with pedigree 0.051225
  EcoSpold01Location=RER
  (2,3,1,2,1,5,BU:1.05); etha+ project Alcosuisse, SSCF technology from NREL
  Uncertainty: etha+ project Alcosuisse, SSCF technology from NREL
  properties: dry mass 1 kg, wet mass 1 kg
- calcium chloride: 0.00120203 kg; lognormal variance with pedigree 0.051225
  (same comment as for ammonia, anhydrous, liquid)
  properties: dry mass 1 kg, wet mass 1 kg
- chemical, organic: 0.000239406 kg; lognormal variance with pedigree 0.051225
  EcoSpold01Location=GLO
  (2,3,1,2,1,5,BU:1.05); etha+ project Alcosuisse, SSCF technology from NREL
  Uncertainty: etha+ project Alcosuisse, SSCF technology from NREL
  properties: carbon content, fossil 0.628, dry mass 1 kg, heating value, net 19.03 MJ, wet mass 1 kg
  note on carbon content, fossil: This dataset is an unweighted average of 20 organic substances (listed in Tab 88.1, ecoinvent v2.2 report 8, part II), being part of the top100 chemicals included in this database. The C-content has also been calculated as an unweighted average of the C content of the substances composing this dataset.
- chlorine, liquid: 6.16358e-6 kg; lognormal variance with pedigree 0.07
  (4,4,2,1,1,5,BU:1.05); adapted from the dataset 'wood chips, in cogen 6400kWth, wood, emission control', according to actual water, carbon and energy content of the fuel (unconverted solids, mainly lignin)
  EcoSpold01Location=RER
  Uncertainty: adapted from the dataset 'wood chips, in cogen 6400kWth, wood, emission control', according to actual water, carbon and energy content of the fuel (unconverted solids, mainly lignin)
  properties: dry mass 1 kg, wet mass 1 kg
- electricity, high voltage: -0.0450073 kWh; name BP_amount_5
  EcoSpold01Location=SE
  production volume
    Unknown
    Calculated relative to ethanol output
  properties: price 0.0977 EUR2005
- ethanol fermentation plant: 4.13734e-10 unit; lognormal variance with pedigree 0.351225
  EcoSpold01Location=CH
  (2,3,1,2,1,5,BU:3); etha+ project Alcosuisse, SSCF technology from NREL
  Uncertainty: etha+ project Alcosuisse, SSCF technology from NREL
- heat and power co-generation unit, 6400kW thermal, building: 4.54751e-9 unit; lognormal variance with pedigree 0.37
  EcoSpold01Location=CH
  (4,4,2,1,1,5,BU:3); adapted from the dataset 'wood chips, in cogen 6400kWth, wood, emission control', according to actual water, carbon and energy content of the fuel (unconverted solids, mainly lignin)
  Uncertainty: adapted from the dataset 'wood chips, in cogen 6400kWth, wood, emission control', according to actual water, carbon and energy content of the fuel (unconverted solids, mainly lignin)
- heat and power co-generation unit, 6400kW thermal, common components for heat+electricity: 1.819e-8 unit; lognormal variance with pedigree 0.37
  (4,4,2,1,1,5,BU:3); adapted from the dataset 'wood chips, in cogen 6400kWth, wood, emission control', according to actual water, carbon and energy content of the fuel (unconverted solids, mainly lignin)
  EcoSpold01Location=CH
  Uncertainty: adapted from the dataset 'wood chips, in cogen 6400kWth, wood, emission control', according to actual water, carbon and energy content of the fuel (unconverted solids, mainly lignin)
- heat and power co-generation unit, 6400kW thermal, components for electricity only: 1.819e-8 unit; lognormal variance with pedigree 0.37
  (same comment as for heat and power co-generation unit, 6400kW thermal, building)
- inorganic nitrogen fertiliser, as N: 0.0016709 kg; lognormal variance with pedigree 0.051225
  (same comment as for ammonium sulfate)
  properties: dry mass 1 kg, wet mass 1 kg
- lubricating oil: 6.16358e-5 kg; lognormal variance with pedigree 0.07
  (same comment as for chlorine, liquid)
  properties: carbon content, fossil 0.75, dry mass 1 kg, heating value, net 40.2 MJ, wet mass 1 kg
  note on carbon content, fossil: Lubricating oil is produced from diesel. C-content/dry mass of fats and oils considered 75%, from: ecoinvent v2.2 report, n 15a, pg 40
  note on heating value, net: Literature value, Source: IPCC 2006, 2006 IPCC Guidelines for National Greenhouse Gas Inventories, Prepared by the National Greenhouse Gas Inventories Programme, Eggleston H.S., Buendia L., Miwa K., Ngara T. and Tanabe K. (eds). Published: IGES, Japan
- magnesium sulfate: 0.000544778 kg; lognormal variance with pedigree 0.051225
  (2,3,1,2,1,5,BU:1.05); etha+ project Alcosuisse, SSCF technology from NREL
  EcoSpold01Location=RER
  Uncertainty: etha+ project Alcosuisse, SSCF technology from NREL
  properties: dry mass 1 kg, wet mass 1 kg
- maize starch: 0.0264682 kg; lognormal variance with pedigree 0.051225
  EcoSpold01Location=DE
  (2,3,1,2,1,5,BU:1.05); etha+ project Alcosuisse, SSCF technology from NREL
  Uncertainty: etha+ project Alcosuisse, SSCF technology from NREL
  properties: carbon content, non-fossil 0.46, dry mass 0.86 kg, heating value, net 11.64 MJ, water content 0.162791, wet mass 1 kg
  note on carbon content, non-fossil: C-content of starch is considered 46% on dry mass basis (from "Evolutionary and Biochemical Aspects", A.D. Kay and T. Vrede (in Global Ecology, 2010, Elsevier B.V., S.E. Jørgensen Ed.)).
- municipal solid waste: -6.16358e-5 kg; name BP_amount_3; lognormal variance with pedigree 0.0302
  EcoSpold01Location=CH
  (4,4,2,1,1,5,BU:1.05); adapted from the dataset 'wood chips, in cogen 6400kWth, wood, emission control', according to actual water, carbon and energy content of the fuel (unconverted solids, mainly lignin)
  Uncertainty: adapted from the dataset 'wood chips, in cogen 6400kWth, wood, emission control', according to actual water, carbon and energy content of the fuel (unconverted solids, mainly lignin)
  production volume
    Calculated from the production volume of ethanol, without water, in 95% solution state, from fermentation in proportion to the respective output amounts.
  properties: carbon content, fossil 0.171549, carbon content, non-fossil 0.261655, dry mass 0.771 kg, heating value, net 11.74 MJ, water content 0.297017, wet mass 1 kg
  note on carbon content, fossil: MSW composition in tab 4.1, ecoinvent v2.2 report 13_I. C content referred to 1 kg DM
  note on heating value, net: Value taken from the general comment of the treatment dataset.
- quicklime, in pieces, loose: 0.0321729 kg; lognormal variance with pedigree 0.051225
  (same comment as for ammonia, anhydrous, liquid)
  properties: dry mass 0.99 kg, water content 0.010101, wet mass 1 kg
- sodium chloride, powder: 7.70421e-5 kg; lognormal variance with pedigree 0.07
  EcoSpold01Location=RER
  (4,4,2,1,1,5,BU:1.05); adapted from the dataset 'wood chips, in cogen 6400kWth, wood, emission control', according to actual water, carbon and energy content of the fuel (unconverted solids, mainly lignin)
  Uncertainty: adapted from the dataset 'wood chips, in cogen 6400kWth, wood, emission control', according to actual water, carbon and energy content of the fuel (unconverted solids, mainly lignin)
  properties: dry mass 1 kg, wet mass 1 kg
- sulfuric acid: 0.082851 kg; lognormal variance with pedigree 0.051225
  (same comment as for magnesium sulfate)
  properties: dry mass 1 kg, wet mass 1 kg
- tap water: 8.05122 kg; name tap_water_input; lognormal variance with pedigree 0.051225
  (same comment as for magnesium sulfate)
  properties: carbon content, fossil 0.00178991, dry mass 0.000337476 kg, water content 2962.17, wet mass 1 kg
  note on carbon content, fossil: Bicarbonate content is 2.93 mol/m3. CO2 content is 0.1 mol/m3 (ecoinvent v2.2 report 8, Tab 93.1).
- transport, tractor and trailer, agricultural: 0.0347005 metric ton*km; lognormal variance with pedigree 0.171225
  EcoSpold01Location=CH
  (2,3,1,2,1,5,BU:2); etha+ project Alcosuisse, SSCF technology from NREL
  Uncertainty: etha+ project Alcosuisse, SSCF technology from NREL
- urea: 0.00107964 kg; lognormal variance with pedigree 0.07
  The exchange has been updated from 'urea, as N' into 'urea' and therefore its amount has been scaled (multiplied) from 0.0001 kg by 2.1438 kg of 'urea' per kg of 'urea, as N'. Original comment of the exchange is: (4,4,2,1,1,5,BU:1.05); adapted from the dataset 'wood chips, in cogen 6400kWth, wood, emission control', according to actual water, carbon and energy content of the fuel (unconverted solids, mainly lignin)
  EcoSpold01Location=RER
  Uncertainty: adapted from the dataset 'wood chips, in cogen 6400kWth, wood, emission control', according to actual water, carbon and energy content of the fuel (unconverted solids, mainly lignin)
  properties: carbon content, fossil 0.2, dry mass 1 kg, wet mass 1 kg
- waste gypsum: -0.108856 kg; name BP_amount_2; lognormal variance with pedigree 0.011225
  (same comment as for ammonia, anhydrous, liquid)
  production volume
    (same comment as for municipal solid waste)
  properties: dry mass 0.806 kg, water content 0.240695, wet mass 1 kg
- waste mineral oil: -6.16358e-5 kg; name BP_amount_4; lognormal variance with pedigree 0.0302
  (same comment as for municipal solid waste)
  production volume
    (same comment as for municipal solid waste)
  properties: carbon content, fossil 0.864444, dry mass 0.9 kg, heating value, net 34.7 MJ, water content 0.111111, wet mass 1 kg
  note on carbon content, fossil: Tab A.6, ecoinvent v2.2 report 13_I. C content has been calculated after data in the tables, and then referred to 1 kg DM
- wastewater, average: -1.47887e-5 m3; name BP_amount_1; lognormal variance with pedigree 0.0302
  (4,4,2,1,1,5,BU:1.05); adapted from the dataset 'wood chips, in cogen 6400kWth, wood, emission control', according to actual water, carbon and energy content of the fuel (unconverted solids, mainly lignin)
  EcoSpold01Location=CH
  Uncertainty: adapted from the dataset 'wood chips, in cogen 6400kWth, wood, emission control', according to actual water, carbon and energy content of the fuel (unconverted solids, mainly lignin)
  production volume
    (same comment as for municipal solid waste)
  properties: carbon content, non-fossil 0.194039, dry mass 0.346837 kg, water content 2882.2, wet mass 1000 kg
  note on carbon content, non-fossil: 0.0673 kg TOC/m3 (Tab A.17, ecoinvent v2.2 report 13_I). TOC was considered as Total Carbon.
- water, decarbonised: 0.0147887 kg; name water_decarbonised_input; lognormal variance with pedigree 0.07
  (same comment as for sodium chloride, powder)
  properties: wet mass 1 kg
- wood ash mixture, pure: -0.00994066 kg; name BP_amount_6; lognormal variance with pedigree 0.0302
  (same comment as for municipal solid waste)
  production volume
    (same comment as for municipal solid waste)
  properties: carbon content, non-fossil 0.012, dry mass 1 kg, wet mass 1 kg
- wood chips, wet, measured as dry mass: 3.85565 kg; lognormal variance with pedigree 0.051225, pedigree (2,3,5,2,1)
  Etha+ project Alcosuisse, SSCF technology from NREL
  Uncertainty: etha+ project Alcosuisse, SSCF technology from NREL
  properties: carbon content, non-fossil 0.494, dry mass 1 kg, heating value, net 10.84 MJ, water content 1.1, wet mass 2.1 kg
  note on heating value, net: Value based on the dataset 'softwood forestry, mixed species, sustainable forest management'

## Emissions to nature
- Acetaldehyde [air, urban air close to ground]: 1.1463e-6 kg; lognormal variance with pedigree 0.11
  (4,4,2,1,1,5,BU:1.5); adapted from the dataset 'wood chips, in cogen 6400kWth, wood, emission control', according to actual water, carbon and energy content of the fuel (unconverted solids, mainly lignin)
  Uncertainty: adapted from the dataset 'wood chips, in cogen 6400kWth, wood, emission control', according to actual water, carbon and energy content of the fuel (unconverted solids, mainly lignin)
- Ammonia [air, urban air close to ground]: 0.000319453 kg; lognormal variance with pedigree 0.07
  (4,4,2,1,1,5,BU:1.2); adapted from the dataset 'wood chips, in cogen 6400kWth, wood, emission control', according to actual water, carbon and energy content of the fuel (unconverted solids, mainly lignin)
  Uncertainty: adapted from the dataset 'wood chips, in cogen 6400kWth, wood, emission control', according to actual water, carbon and energy content of the fuel (unconverted solids, mainly lignin)
- Arsenic ion [air, urban air close to ground]: 1.87917e-8 kg; lognormal variance with pedigree 0.71
  (4,4,2,1,1,5,BU:5); adapted from the dataset 'wood chips, in cogen 6400kWth, wood, emission control', according to actual water, carbon and energy content of the fuel (unconverted solids, mainly lignin)
  Uncertainty: adapted from the dataset 'wood chips, in cogen 6400kWth, wood, emission control', according to actual water, carbon and energy content of the fuel (unconverted solids, mainly lignin)
- Benzene [air, urban air close to ground]: 1.8519e-5 kg; lognormal variance with pedigree 0.11
  (same comment as for Acetaldehyde)
- Benzene, ethyl- [air, urban air close to ground]: 6.10528e-7 kg; lognormal variance with pedigree 0.11
  (same comment as for Acetaldehyde)
- Benzene, hexachloro- [air, urban air close to ground]: 1.46526e-13 kg; lognormal variance with pedigree 0.37
  (4,4,2,1,1,5,BU:3); adapted from the dataset 'wood chips, in cogen 6400kWth, wood, emission control', according to actual water, carbon and energy content of the fuel (unconverted solids, mainly lignin)
  Uncertainty: adapted from the dataset 'wood chips, in cogen 6400kWth, wood, emission control', according to actual water, carbon and energy content of the fuel (unconverted solids, mainly lignin)
- Benzo(a)pyrene [air, urban air close to ground]: 1.01749e-8 kg; lognormal variance with pedigree 0.37
  (same comment as for Benzene, hexachloro-)
- Bromine [air, urban air close to ground]: 1.12749e-6 kg; lognormal variance with pedigree 0.71
  (same comment as for Arsenic ion)
- Cadmium II [air, urban air close to ground]: 1.31543e-8 kg; lognormal variance with pedigree 0.71
  (same comment as for Arsenic ion)
- Calcium [air, urban air close to ground]: 0.000109931 kg; lognormal variance with pedigree 0.71
  (same comment as for Arsenic ion)
- Carbon dioxide, non-fossil [air, urban air close to ground]: 5.15338 kg; lognormal variance with pedigree 0.04
  (1,1,1,1,1,1,BU:1.05); to close carbon cycle
  Uncertainty: to close carbon cycle
- Carbon monoxide, non-fossil [air, urban air close to ground]: 0.00014246 kg; lognormal variance with pedigree 0.71
  (same comment as for Arsenic ion)
- Chlorine [air, urban air close to ground]: 3.38247e-6 kg; lognormal variance with pedigree 0.11
  (same comment as for Acetaldehyde)
- Chromium III [air, urban air close to ground]: 7.44188e-8 kg; lognormal variance with pedigree 0.71
  (same comment as for Arsenic ion)
- Chromium VI [air, urban air close to ground]: 7.51683e-10 kg; lognormal variance with pedigree 0.71
  (same comment as for Arsenic ion)
- Copper ion [air, urban air close to ground]: 4.13408e-7 kg; lognormal variance with pedigree 0.71
  (same comment as for Arsenic ion)
- Dinitrogen monoxide [air, urban air close to ground]: 0.000413408 kg; lognormal variance with pedigree 0.11
  (same comment as for Acetaldehyde)
- Dioxins, measured as 2,3,7,8-tetrachlorodibenzo-p-dioxin [air, urban air close to ground]: 6.30883e-13 kg; lognormal variance with pedigree 0.37
  (same comment as for Benzene, hexachloro-)
- Fluorine [air, urban air close to ground]: 9.39552e-7 kg; lognormal variance with pedigree 0.11
  (same comment as for Acetaldehyde)
- Formaldehyde [air, urban air close to ground]: 2.64564e-6 kg; lognormal variance with pedigree 0.11
  (same comment as for Acetaldehyde)
- Hydrocarbons, aliphatic, alkanes, unspecified [air, urban air close to ground]: 1.8519e-5 kg; lognormal variance with pedigree 0.11
  (same comment as for Acetaldehyde)
- Hydrocarbons, aliphatic, unsaturated [air, urban air close to ground]: 6.30883e-5 kg; lognormal variance with pedigree 0.11
  (same comment as for Acetaldehyde)
- Lead II [air, urban air close to ground]: 4.67909e-7 kg; lognormal variance with pedigree 0.71
  (same comment as for Arsenic ion)
- Magnesium [air, urban air close to ground]: 6.78375e-6 kg; lognormal variance with pedigree 0.71
  (same comment as for Arsenic ion)
- Manganese II [air, urban air close to ground]: 3.21327e-6 kg; lognormal variance with pedigree 0.71
  (same comment as for Arsenic ion)
- Mercury II [air, urban air close to ground]: 5.63738e-9 kg; lognormal variance with pedigree 0.71
  (same comment as for Arsenic ion)
- Methane, non-fossil [air, urban air close to ground]: 8.83198e-6 kg; lognormal variance with pedigree 0.11
  (same comment as for Acetaldehyde)
- NMVOC, non-methane volatile organic compounds [air, urban air close to ground]: 1.24138e-5 kg; lognormal variance with pedigree 0.11
  (same comment as for Acetaldehyde)
- Nickel II [air, urban air close to ground]: 1.12749e-7 kg; lognormal variance with pedigree 0.71
  (same comment as for Arsenic ion)
- Nitrogen oxides [air, urban air close to ground]: 0.000826844 kg; lognormal variance with pedigree 0.11
  (same comment as for Acetaldehyde)
- PAH, polycyclic aromatic hydrocarbons [air, urban air close to ground]: 2.2386e-7 kg; lognormal variance with pedigree 0.37
  (same comment as for Benzene, hexachloro-)
- Particulate Matter, < 2.5 um [air, urban air close to ground]: 0.000101749 kg; lognormal variance with pedigree 0.37
  (same comment as for Benzene, hexachloro-)
- Phenol, pentachloro- [air, urban air close to ground]: 1.64848e-10 kg; lognormal variance with pedigree 0.11
  (same comment as for Acetaldehyde)
- Phosphorus [air, urban air close to ground]: 5.63738e-6 kg; lognormal variance with pedigree 0.11
  (same comment as for Acetaldehyde)
- Potassium I [air, urban air close to ground]: 0.000439718 kg; lognormal variance with pedigree 0.71
  (same comment as for Arsenic ion)
- Sodium [air, urban air close to ground]: 2.44285e-5 kg; lognormal variance with pedigree 0.71
  (same comment as for Arsenic ion)
- Sulfur dioxide [air, urban air close to ground]: 4.67909e-5 kg; lognormal variance with pedigree 0.07
  (4,4,2,1,1,5,BU:1.05); adapted from the dataset 'wood chips, in cogen 6400kWth, wood, emission control', according to actual water, carbon and energy content of the fuel (unconverted solids, mainly lignin)
  Uncertainty: adapted from the dataset 'wood chips, in cogen 6400kWth, wood, emission control', according to actual water, carbon and energy content of the fuel (unconverted solids, mainly lignin)
- Toluene [air, urban air close to ground]: 6.10528e-6 kg; lognormal variance with pedigree 0.11
  (same comment as for Acetaldehyde)
- Water [air, unspecified]: 0.00749844 m3; name water_to_air_unspecified; = (tap_water_input/1000*fraction_TW_to_air)+(water_decarbonised_input/1000*fraction_WDC_to_air); lognormal variance with pedigree 0.0807, pedigree (2,2,5,1,1)
  Calculated value based on literature values and expert opinion. See comments in the parametres' comment field.
  property fraction, origin: fresh water 1; name fraction_origin_fresh_water
  property fraction, origin: salt water 0; name fraction_origin_salt_water
  property fraction, origin: unspecified 0; name fraction_origin_unspecified
- Zinc II [air, urban air close to ground]: 5.63738e-6 kg; lognormal variance with pedigree 0.71
  (same comment as for Arsenic ion)
- m-Xylene [air, urban air close to ground]: 2.44208e-6 kg; lognormal variance with pedigree 0.11
  (same comment as for Acetaldehyde)
- Water [water, unspecified]: 0.000567567 m3; name water_to_water_unspecified; = (tap_water_input/1000)*(1-fraction_TW_to_air)+(water_decarbonised_input/1000)*(1-fraction_WDC_to_air); lognormal variance with pedigree 0.0807, pedigree (2,2,5,1,1)
  (same comment as for Water)
  property carbon content, fossil 0; name C_content_fossil
  property carbon content, non-fossil 0; name C_content_non_fossil
  property fraction, origin: fresh water 1; name fraction_origin_fresh_water_Ww
  property fraction, origin: salt water 0; name fraction_origin_salt_water_Ww
  property fraction, origin: unspecified 0; name fraction_origin_unspecified_Ww
  property water in wet mass 1000 kg; name WWM

## Extrapolations
Literature data.

## Review by Roland Hischier 2010-02-24
passed.
-
