# heat and power co-generation, wood chips, 6667 kW, state-of-the-art 2014

Dataset: EcoSpold 2, unit process
Geography: US-NPCC
Time period: 2010-01-01 to 2022-12-31
Technology level: modern
Classification: ISIC rev.4 ecoinvent: 3530:Steam and air conditioning supply
Tags: United States; wood power; with true value
Scenario: Business-as-Usual
System model: Substitution, consequential, long-term
Generated by: Karin Treyer
Published in: Bauer, C. 2007
Database: ecoinvent
isCopyrightProtected: true

## General comment
This dataset represents the production of heat and electricity with wood chips in a state-of-the-art (as of 2014) co-generation plant with a capacity of 6667 kW (referring to fuel input) in Switzerland and was used as approximation for this dataset valid for in US - Northeast Power Coordinating Council (uncertainties adjusted accordingly). The technology corresponds to a modern unit to be installed in 2014 in Switzerland, which is equipped with an electrostatic precipitator for particulate matter (PM) emission reduction and an SNCR device for reduction of NOx emissions. It is assumed that the plant is operated mainly producing heat, i.e. following the heat demand. Heat is therefore considered as the main product and therefore the reference product, whereas electricity is a by-product. Electricity is produced with an organic rankine cycle (ORC) steam generator.
Wood chips are burned in a boiler at a temperature of 800-1300 °C under excess air conditions and turned into carbon dioxide and water. Energy is set free in form of heat. Burning takes place with the following steps:
1. Drying
2. degradation of the wood into carbon and gases
3. degradation of the carbon into gases
4. oxidation of the gases
These phases overlap. The produced heat can be used directly or for steam production in order to generate electricity with a turbine.
Emissions vary with quality of the combustion (temperatur, mixing of the combustion gases and the added fresh air, retention time of gases in the combustor), filter technologies and with the efficiency of the plant. Emission data in this dataset are taken from measurements and literature as well as from communication with experts.
CO2 emissions were calculated out of the carbon content of the wood used as combustible. Carbon emitted in carbon monoxide was subtracted from the result.
Key emissions factors for CO, NOx, CH4, NMVOC and particles were updated according to latest data.
All other emission factors (per MJ fuel input) correspond to the 1000 kW boiler fuelled with wood chips from forest. Other exchanges correspond to the LCI data for the 6400 kW co-generation unit in ecoinvent v2.2.
Good J., Nussbaumer T., Bühler R., Jenni A. (1996) Erfolgskontrolle des SNCRVerfahren
zur Entstickung von Holzfeuerungen. Schlussbericht des BEWProjektes
53894. Zürich, Schweiz.

## Included activities start
From wood chips ready to be burned in cogeneration unit (for heat and power production).

## Included activities end
This activity ends with heat and electricity produced.

This dataset includes the infrastructure, the wood input, the emissions to air and the disposal of the ashes. Also included are substances needed for operation: lubricating oil, organic chemicals, sodium chloride, chlorine and decarbonized water.

## Technology
Electric efficiency: 0.15; Thermal efficiency: 0.45;
Total efficiency: 0.6

## Time period
The Annual Production Volume is valid for the year 2012

## Parameters
- electrical efficiency: 0.15 dimensionless; name efficiency_electrical
  Electric efficiency of the cogeration system, corresponding to annual operation including warm-up and cool-down
  nan
- thermal efficiency: 0.45 dimensionless; name efficiency_thermal
  Thermal efficiency of the cogeration system, corresponding to annual operation including warm-up and cool-down
  nan

## Reference product
- heat, district or industrial, other than natural gas: 1 MJ; name heat_out; = 1*efficiency_thermal; source Thomas Nussbaumer 2014; By-product classification allocatable product; CPC 17300: Steam and hot water
  Thermal efficiency referring to the LHV of the fuel input
  production volume 3.39876e10 MJ
    Calculation/rough estimation. The annual production of heat is calculated based on the production of grid-connected electricity produced with wood. This does not take into account that there might be plants not producing electricity at all or not producing grid-connected electricity or that the efficiencies might be different than those mentioned in the technology comment.
  property corresponding fuel use, propane, furnace >100kW 0 MJ; name fuel_use
    Lower heating value of the fuel input related to the heat/electricity output, taken directly from ecoinvent v3.0 dataset 'heat production, natural gas, at industrial furnace >100kW, GLO 2000'.
  property exergy 0.169678 MJ; name heat_exergy
    allocation factor for electricity (=1) vs. heat, where heat is calculated as the termodynamic mean temperature Tm = (Tfeed-Treturn)/ln(Tfeed/Treturn), relative to the application temperature (Tu, typically = 293 K), i.e. (Tm-Tu)/Tm
  property price 0.0106 EUR2005
    Average European district heat price from Ecoheatcool and Euroheat 2005-2006, Ecoheat Work package 1: The European heat market. Final report. 10.6 EUR/GJ i s the price of district heat. http://www.solarthermalworld.org/files/Ecoheatcool%20WP1%20Web.pdf?download
  property true value relation 0.169678; name heat_true_value_relation
    property to calculate 'true value' from
  properties: carbon allocation 0 kg, carbon content 0, heating value, net 1 MJ

## Inputs from technosphere
- NOx retained, by selective catalytic reduction: 0.000177778 kg; source Thomas Nussbaumer 2014
  expert estimation (see source)
  properties: dry mass 1 kg, wet mass 1 kg
- ammonia, anhydrous, liquid: 1.82222e-8 kg; source Bauer, C. 2007
  literature
  properties: dry mass 1 kg, wet mass 1 kg
- chemical, organic: 1.3e-5 kg; source Bauer, C. 2007
  literature
  properties: carbon content, fossil 0.628, dry mass 1 kg, heating value, net 19.03 MJ, wet mass 1 kg
  note on carbon content, fossil: This dataset is an unweighted average of 20 organic substances (listed in Tab 88.1, ecoinvent v2.2 report 8, part II), being part of the top100 chemicals included in this database. The C-content has also been calculated as an unweighted average of the C content of the substances composing this dataset.
- chlorine, liquid: 7.28889e-7 kg; source Bauer, C. 2007
  literature
  properties: dry mass 1 kg, wet mass 1 kg
- dust collector, electrostatic precipitator, for industrial use: 1.15735e-9 unit; = 1/(4000*6667*20*3.6)
  calculated value, assuming 4000h/a operation time, 20a lifetime, 6667kW (fuel input) capacity
- electricity, high voltage: -0.0925926 kWh; name electricity_out; = 1*efficiency_electrical/3.6; source Thomas Nussbaumer 2014
  Electricl efficiency referring to the LHV of the fuel input
  production volume
    Literature value. Data from the US Energy Information Administration for 2012, which provides data on net electricity production in each US State with various energy sources. Electricity from biomass is given for 'wood and wood-derived fuels', which is modelled with this dataset, and for electricity from 'other biomass', which is modelled with a heat and power co-generation biogas dataset. Data from the States were aggregated on the level of US NERC regions.
    EIA. 2013. Statistics on electricity - Electricity data browser. Generation and thermal output. Net generation for electric power, annual. U.S. Energy Information Administration; Independent Statistics&Analysis.
  property exergy 3.6 MJ; name electricity_exergy
  property true value relation 3.6; name electricity_true_value_relation
  properties: price 0.0977 EUR2005
  note on exergy: allocation factor for electricity (=1) vs. heat, where heat is calculated as the termodynamic mean temperature Tm = (Tfeed-Treturn)/ln(Tfeed/Treturn), relative to the application temperature (Tu, typically = 293 K), i.e. (Tm-Tu)/Tm
- furnace, wood chips, with silo, 5000kW: 1.15735e-9 unit; = 1/(4000*6667*20*3.6)
  (same comment as for dust collector, electrostatic precipitator, for industrial use)
- heat and power co-generation unit, organic Rankine cycle, 1000kW electrical: 1.15735e-9 unit; = 1/(4000*6667*20*3.6)
  (same comment as for dust collector, electrostatic precipitator, for industrial use)
- lubricating oil: 7.28889e-6 kg; name lubricating_oil; source Bauer, C. 2007
  literature
  properties: carbon content, fossil 0.75, dry mass 1 kg, heating value, net 40.2 MJ, wet mass 1 kg
  note on carbon content, fossil: Lubricating oil is produced from diesel. C-content/dry mass of fats and oils considered 75%, from: ecoinvent v2.2 report, n 15a, pg 40
  note on heating value, net: Literature value, Source: IPCC 2006, 2006 IPCC Guidelines for National Greenhouse Gas Inventories, Prepared by the National Greenhouse Gas Inventories Programme, Eggleston H.S., Buendia L., Miwa K., Ngara T. and Tanabe K. (eds). Published: IGES, Japan
- municipal solid waste: -7.28889e-6 kg; name municipal_waste; source Bauer, C. 2007
  literature
  production volume
    Calculated from the production volume of heat, district or industrial, other than natural gas in proportion to the respective output amounts.
  properties: carbon content, fossil 0.171549, carbon content, non-fossil 0.261655, dry mass 0.771 kg, heating value, net 11.74 MJ, water content 0.297017, wet mass 1 kg
  note on carbon content, fossil: MSW composition in tab 4.1, ecoinvent v2.2 report 13_I. C content referred to 1 kg DM
  note on heating value, net: Value taken from the general comment of the treatment dataset.
- sodium chloride, powder: 9.11111e-6 kg; source Bauer, C. 2007
  literature
  properties: dry mass 1 kg, wet mass 1 kg
- waste mineral oil: -7.28889e-6 kg; name waste_oil; = (lubricating_oil)
  literature
  production volume
    (same comment as for municipal solid waste)
  properties: carbon content, fossil 0.864444, dry mass 0.9 kg, heating value, net 34.7 MJ, water content 0.111111, wet mass 1 kg
  note on carbon content, fossil: Tab A.6, ecoinvent v2.2 report 13_I. C content has been calculated after data in the tables, and then referred to 1 kg DM
- wastewater, average: -1.74889e-6 m3; name sewage; = (water_decarbonised/1000); source Bauer, C. 2007
  literature
  production volume
    (same comment as for municipal solid waste)
  properties: carbon content, non-fossil 0.194039, dry mass 0.346837 kg, water content 2882.2, wet mass 1000 kg
  note on carbon content, non-fossil: 0.0673 kg TOC/m3 (Tab A.17, ecoinvent v2.2 report 13_I). TOC was considered as Total Carbon.
- water, decarbonised: 0.00174889 kg; name water_decarbonised; source Bauer, C. 2007
  literature
  properties: wet mass 1 kg
- wood ash mixture, pure: -0.00117556 kg; name wood_ash; source Bauer, C. 2007
  literature
  production volume
    (same comment as for municipal solid waste)
  properties: carbon content, non-fossil 0.012, dry mass 1 kg, wet mass 1 kg
- wood chips, wet, measured as dry mass: 0.117578 kg; = 1/18.9
  LHV of wood chips: 18.9 MJ/kg (dry mass)
  Calculated value.
  properties: carbon content, non-fossil 0.494, dry mass 1 kg, heating value, net 10.84 MJ, water content 1.1, wet mass 2.1 kg
  note on heating value, net: Value based on the dataset 'softwood forestry, mixed species, sustainable forest management'

## Emissions to nature
- Acetaldehyde [air, urban air close to ground]: 1.35556e-7 kg; source Bauer, C. 2007
  literature
- Ammonia [air, urban air close to ground]: 3.77778e-5 kg; source Bauer, C. 2007
  literature
- Arsenic ion [air, urban air close to ground]: 2.22222e-9 kg; source Bauer, C. 2007
  literature
- Benzene [air, urban air close to ground]: 2.02222e-6 kg; source Bauer, C. 2007
  literature
- Benzene, ethyl- [air, urban air close to ground]: 6.66667e-8 kg; source Bauer, C. 2007
  literature
- Benzene, hexachloro- [air, urban air close to ground]: 1.6e-14 kg; source Bauer, C. 2007
  literature
- Benzo(a)pyrene [air, urban air close to ground]: 1.11111e-9 kg; source Bauer, C. 2007
  literature
- Bromine [air, urban air close to ground]: 1.33333e-7 kg; source Bauer, C. 2007
  literature
- Cadmium II [air, urban air close to ground]: 1.55556e-9 kg; source Bauer, C. 2007
  literature
- Calcium [air, urban air close to ground]: 1.3e-5 kg; source Bauer, C. 2007
  literature
- Carbon dioxide, non-fossil [air, urban air close to ground]: 0.213333 kg; source Bauer, C. 2007
  literature
- Carbon monoxide, non-fossil [air, urban air close to ground]: 0.000222222 kg; source Thomas Nussbaumer 2014
  expert estimation (see source)
- Chlorine [air, urban air close to ground]: 4e-7 kg; source Bauer, C. 2007
  literature
- Chromium III [air, urban air close to ground]: 8.8e-9 kg; source Bauer, C. 2007
  literature
- Chromium VI [air, urban air close to ground]: 8.88889e-11 kg; source Bauer, C. 2007
  literature
- Copper ion [air, urban air close to ground]: 4.88889e-8 kg; source Bauer, C. 2007
  literature
- Dinitrogen monoxide [air, urban air close to ground]: 5.11111e-6 kg; source Bauer, C. 2007
  literature
- Dioxins, measured as 2,3,7,8-tetrachlorodibenzo-p-dioxin [air, urban air close to ground]: 6.88889e-14 kg; source Bauer, C. 2007
  literature
- Fluorine [air, urban air close to ground]: 1.11111e-7 kg; source Bauer, C. 2007
  literature
- Formaldehyde [air, urban air close to ground]: 2.88889e-7 kg; source Bauer, C. 2007
  literature
- Hydrocarbons, aliphatic, alkanes, unspecified [air, urban air close to ground]: 2.02222e-6 kg; source Bauer, C. 2007
  literature
- Hydrocarbons, aliphatic, unsaturated [air, urban air close to ground]: 6.88889e-6 kg; source Bauer, C. 2007
  literature
- Lead II [air, urban air close to ground]: 5.55556e-8 kg; source Bauer, C. 2007
  literature
- Magnesium [air, urban air close to ground]: 8e-7 kg; source Bauer, C. 2007
  literature
- Manganese II [air, urban air close to ground]: 3.77778e-7 kg; source Bauer, C. 2007
  literature
- Mercury II [air, urban air close to ground]: 6.66667e-10 kg; source Bauer, C. 2007
  literature
- Methane, non-fossil [air, urban air close to ground]: 2.66667e-6 kg; source Thomas Nussbaumer 2014
  expert estimation (see source)
- NMVOC, non-methane volatile organic compounds [air, urban air close to ground]: 6.22222e-6 kg; source Thomas Nussbaumer 2014
  expert estimation (see source)
- Nickel II [air, urban air close to ground]: 1.33333e-8 kg; source Bauer, C. 2007
  literature
- Nitrogen oxides [air, urban air close to ground]: 0.000177778 kg; source Thomas Nussbaumer 2014
  expert estimation (see source)
- PAH, polycyclic aromatic hydrocarbons [air, urban air close to ground]: 2.46667e-8 kg; source Bauer, C. 2007
  literature
- Particulate Matter, < 2.5 um [air, urban air close to ground]: 1.11111e-5 kg; source Thomas Nussbaumer 2014
  expert estimation (see source)
- Phenol, pentachloro- [air, urban air close to ground]: 1.8e-11 kg; source Bauer, C. 2007
  literature
- Phosphorus [air, urban air close to ground]: 6.66667e-7 kg; source Bauer, C. 2007
  literature
- Potassium I [air, urban air close to ground]: 5.2e-5 kg; source Bauer, C. 2007
  literature
- Sodium [air, urban air close to ground]: 2.88889e-6 kg; source Bauer, C. 2007
  literature
- Sulfur dioxide [air, urban air close to ground]: 5.55556e-6 kg; source Bauer, C. 2007
  literature
- Toluene [air, urban air close to ground]: 6.66667e-7 kg; source Bauer, C. 2007
  literature
- Water [air, non-urban air or from high stacks]: 0.000129333 m3
  calculation based on water balance
- Zinc II [air, urban air close to ground]: 6.66667e-7 kg; source Bauer, C. 2007
  literature
- m-Xylene [air, urban air close to ground]: 2.66667e-7 kg; source Bauer, C. 2007
  literature

## Sampling procedure
literature, expert judgement, extrapolation

## Extrapolations
This dataset has been copied from a dataset valid for Switzerland (CH) without adjustment of any emission data. Uncertainty has been adjusted accordingly.
