# cottonseed meal to generic market for protein feed

Dataset: EcoSpold 2, unit process
Geography: GLO
Time period: 2012-01-01 to 2022-12-31
Technology level: current
Classification: ISIC rev.4 ecoinvent: 1080:Manufacture of prepared animal feeds
Scenario: Business-as-Usual
System model: Substitution, consequential, long-term
Generated by: Tereza Levova
Database: ecoinvent
isCopyrightProtected: true

## General comment
This activity is a linking activity, i.e. it connects cottonseed meal with generic protein feed market. Cottonseed meal is used mainly as a feed for animals, thus traded on generic feed market with other protein - containing products.

## Included activities end
Cottonseed meal is a by-product from cotton production. This linking activity has the cottonseed meal as input and produces protein and energy feed as output.

## Parameters
- fraction_to_generic_market: 0.9 % (obsolete); lognormal variance with pedigree 0.108, pedigree (4,1,1,1,1)
  It is assumed that 90% of cotton seed meal is traded on generic protein feed market, i.e. its buyers do not care what type of protein feed they are buying. Remaining 10% of the production volume (PV) is assumed to be used for uses, where specific type of protein feed is required and cannot be substituted by any other protein feed.

## Reference product
- cottonseed meal: 1 kg; name cottonseed_meal_IN; By-product classification allocatable product; CPC 23319: Preparations used in animal feeding n.e.c.
  production volume 1 kg
  property gross energy, feed per kg of dry mass 19.41 MJ/kg; name cottonseed_meal_gross_E_feed_per_kg_DM_0
    Literature value from Agroscope database (http://www.feed-alp.admin.ch). Agroscope (http://www.agroscope.admin.ch/org/index.html?lang=en) is a research institute which belongs to the Swiss Federal Office for Agriculture.
  property price 0.127 EUR2005; name cottonseed_meal_RP_price_EUR2005_1
    Temporary price data. The price is estimated to be the same as in case of rape meal.
  property protein feed, 100% crude per kg of dry mass 0.304 kg/kg; name cottonseed_meal_protein_feed_per_kg_DM_0
    (same comment as for cottonseed meal)
  properties: carbon allocation 0.380518 kg, carbon content 0.422797, carbon content, fossil 0, carbon content, non-fossil 0.422797, dry mass 0.9 kg, water content 0.111111, water in wet mass 0.1 kg, wet mass 1 kg

## Inputs from technosphere
- energy feed, gross: 0.801249, 16.6678 MJ (2 suppliers, which the file names only by identifier); sum of these 17.469 MJ; = cottonseed_meal_gross_E_feed_per_kg_DM_0*0.9; lognormal variance with pedigree 0.0093, pedigree (4,3,1,3,1)
  Calculated based on literature value from Agroscope database (http://www.feed-alp.admin.ch). Agroscope (http://www.agroscope.admin.ch/org/index.html?lang=en) is a research institute which belongs to the Swiss Federal Office for Agriculture. The dry mass of the reference product is 0.9kg/kg.
  production volume
    Calculated from production volume of input of meal using the relative outputs. 1.4573E+10 kg of cotton seed meal is produced as a by-product in "cotton seed mill operation" activity. It is assumed that 90% of cotton seed meal is traded on generic protein feed market, i.e. its buyers do not care what type of protein feed they are buying. Remaining 10% of the production volume (PV) is assumed to be used for uses, where specific type of protein feed is required and cannot be substituted by any other protein feed.
  properties: dry mass 1 kg, price 0.0108 EUR2005, wet mass 1 kg
- protein feed, 100% crude: 0.2736 kg; name RP; = cottonseed_meal_protein_feed_per_kg_DM_0*0.9
  (same comment as for energy feed, gross)
  production volume
    (same comment as for energy feed, gross)
  properties: carbon content, non-fossil 0.53, dry mass 1 kg, price 0.424 EUR2005, wet mass 1 kg

## Review by Bo Weidema 2012-03-14
Production volumes are for 2005, even though the dataset is indicated to be valid for 2012.
