# molybdenum production

Dataset: EcoSpold 2, unit process
Geography: RoW
Time period: 2000-01-01 to 2022-12-31
Technology level: current
Classification: EcoSpold01Categories: metals/extraction
Classification: ISIC rev.4 ecoinvent: 2420:Manufacture of basic precious and other non-ferrous metals
Scenario: Business-as-Usual
System model: Substitution, consequential, long-term
Generated by: Hans-Jörg Althaus
Published in: Classen M. 2009
Database: ecoinvent
isCopyrightProtected: true

## General comment
Molybdenum is used e.g. in catalytic converters. It is not used for alloying steel. For this, molybdenum trioxide or molybdenite is used. For a lack of specific data, the metallurgical process of the zinc production is used as a proxy. Only the input of the concentrate is adapted. Although zinc and molybdenum concentrate are both sulfidic and the metal content is almost the same, this is a crude assumption and the data quality therefore is poor.
[This dataset was already contained in the ecoinvent database version 2. It was not individually updated during the transfer to ecoinvent version 3. Life Cycle Impact Assessment results may still have changed, as they are affected by changes in the supply chain, i.e. in other datasets. This dataset was generated following the ecoinvent quality guidelines for version 2. It may have been subject to central changes described in the ecoinvent version 3 change report (http://www.ecoinvent.org/database/ecoinvent-version-3/reports-of-changes/), and the results of the central updates were reviewed extensively. The changes added e.g. consistent water flows and other information throughout the database. The documentation of this dataset can be found in the ecoinvent reports of version 2, which are still available via the ecoinvent website. The change report linked above covers all central changes that were made during the conversion process.]

## Included activities start
From reception of raw materials at the factory gate.

## Included activities end
The module includes the production of high grade primary molybdenum by pyro- and hydrometallurgical processes, the disposal of the slag and the treatment of the waste water.

## Technology
A mix of 80% hydrometallurgical and 20% pyrometallurgical production of zinc is chosen to represent the molybdenum production

## Parameters
- fraction, process water, to air: 0.15 dimensionless; name fraction_PW_to_air; lognormal variance with pedigree 0.092025, pedigree (4,4,3,2,4)
  Literature value. In case when no industry/process specific data are available, default evaporation fraction value is used. This value is 15% and is based on literature (Statistics Canada, 2007 & Shaffer, K.H., 2008, Consumptive water use in the Great Lakes Basin, USGS & Shiklomanov, 2003, World Water Resources at the Beginning of the 21st Century) and has been approved by an expert.

## Reference product
- molybdenum: 1 kg; name RP_amount_1; By-product classification allocatable product; CPC 41601: Tungsten, molybdenum, tantalum, magnesium, cobalt, cadmium, titanium, zirconium, beryllium, gallium, hafnium, […]; CAS 7439-98-7
  EcoSpold01Location=RER
  Estimation from dataset author.
  Molybdenum uses: In the steel and foundry industry molybdenum is added to melts, either as technical oxide or in the form of ferromolybdenum [11121-95-2]. Compared to pure molybdenum, ferromolybdenum dissolves much more easily in the steel melt and is cheaper to produce.
  production volume 1.82e8 kg
    Literature value; the total world production volume of molybdenum in 2005 is 1.85E5 tonnes (USGS, http://minerals.usgs.gov/minerals/pubs/commodity/molybdenum/molybmcs07.pdf, accessed 20140619).
  property price 12.3861 EUR2005
    Price calculated as 5-year market average (2015-2019; USD/kg; USGS [2020]) and converted to EUR2005 (USD2019/EUR2005 exchange rate: 0.62; Official Data Foundation [2020] and Macrotrends [2020]).
    References:
    Official Data Foundation (2020). Inflation Calculator [Online]. Available from: https://www.officialdata.org/us/inflation/2005?endYear=2019&amount=1 [Accessed 28/07/2020]
    USGS (2020). Mineral Commodity Summaries 2020 [Online]. Available from: https://pubs.usgs.gov/periodicals/mcs2020/mcs2020.pdf [Accessed 28/07/2020]
    Macrotrends (2020). Euro Dollar Exchange Rate (EUR USD) - Historical Chart [Online]. Available from: https://www.macrotrends.net/2548/euro-dollar-exchange-rate-historical-chart [Accessed 28/07/2020]
  properties: carbon allocation 0 kg, carbon content 0, carbon content, fossil 0, carbon content, non-fossil 0, dry mass 1 kg, water content 0, water in wet mass 0 kg, wet mass 1 kg

## Inputs from technosphere
- cadmium sludge from zinc electrolysis: -0.0033778 kg; name BP_amount_3
  Estimation from dataset author.
  production volume
    Calculated from production volume of reference product using the relative outputs.
  properties: dry mass 1 kg, price 0.989904 EUR2005, wet mass 1 kg
- diesel, burned in building machine: 0.041944 MJ; lognormal variance with pedigree 0.0606, pedigree (3,3,5,1,3)
  Calculated value: This value stands for diesel and gasoline consumption.
  properties: heating value, net 1 MJ
- electricity, high voltage: 0.0115758, 0.0115738, 2.56903, 0.216403, 0.324181, 0.147238 kWh (6 suppliers, which the file names only by identifier); sum of these 3.28 kWh; lognormal variance with pedigree 0.2626, pedigree (3,3,5,1,5)
  Modelled, based on “ISIC 2420” - pdf-document on the dedicated talk page of ecoinvent (www.ecoinvent.org/documentation).
  See section: Regarding “primary zinc production from concentrate, GLO 2003” dataset.
  Estimation: Electricity consumption for electrolysis is aproximated with that consumed in aluminum electrolysis.
- electricity, medium voltage: 0.0200126, 0.0138645, 0.00074313, 0.165117, 0.000748775, 0.00951345 kWh (6 suppliers, which the file names only by identifier); sum of these 0.21 kWh; lognormal variance with pedigree 0.2626, pedigree (3,3,5,1,5)
  Modelled, based on “ISIC 2420” - pdf-document on the dedicated talk page of ecoinvent (www.ecoinvent.org/documentation).
  See section: Regarding “primary zinc production from concentrate, GLO 2003” dataset.
- heat, district or industrial, natural gas: 0.200017, 1.31818 MJ (2 suppliers, which the file names only by identifier); sum of these 1.51819 MJ; lognormal variance with pedigree 0.0606, pedigree (3,3,5,1,3)
  Modelled, based on "ISIC 2420" - pdf-document on the dedicated talk page of ecoinvent (www.ecoinvent.org/documentation).
  See section: Regarding "primary zinc production from concentrate, GLO 2003" dataset.
  properties: heating value, net 1 MJ
- heat, district or industrial, other than natural gas: 5.53434, 0.00966394 MJ (2 suppliers, which the file names only by identifier); sum of these 5.544 MJ; lognormal variance with pedigree 0.0606, pedigree (3,3,5,1,3)
  (same comment as for electricity, medium voltage)
  properties: heating value, net 1 MJ
- indium rich leaching residues, from zinc production: -0.33939 kg; name BP_amount_4
  Estimation from dataset author.
  production volume
    Calculated from production volume of reference product using the relative outputs.
  properties: dry mass 1 kg, price 0.0043 EUR2005, wet mass 1 kg
- inert waste, for final disposal: -0.032028 kg; name BP_amount_2; lognormal variance with pedigree 0.0208, pedigree (3,3,2,1,3)
  Proxy: "inert waste, 5% water" is used as a proxy for the portion of the waste fraction that is not further processed for extracting byproduct metals, but rather disposed of.
  production volume
    Calculated from production volume of reference product using the relative outputs.
  properties: dry mass 0.995 kg, water content 0.00502513, wet mass 1 kg
- molybdenite: 1.8336 kg; lognormal variance with pedigree 0.288, pedigree (4,5,5,5,5)
  Estimation from dataset author.
  Estimated value: The amount of molybdenite concentrate is calculated assuming the same yield as for zinc concentrate to zinc. It is slightly lower than the amount of zinc concentrate, because the metal concentration is slightly higher (55% Mo vs. 53% Zn).
  EcoSpold01Location=GLO
  properties: dry mass 1 kg, wet mass 1 kg
- oxygen, liquid: 0.1084 kg; lognormal variance with pedigree 0.0606, pedigree (3,3,5,1,3)
  (same comment as for heat, district or industrial, natural gas)
  properties: dry mass 1 kg, wet mass 1 kg
- steam, in chemical industry: 1.0938 kg; lognormal variance with pedigree 0.0606, pedigree (3,3,5,1,3)
  (same comment as for electricity, medium voltage)
  properties: dry mass 1 kg, wet mass 1 kg
- wastewater, unpolluted: -0.03896 m3; name BP_amount_1; lognormal variance with pedigree 0.0208, pedigree (3,3,2,1,3)
  (same comment as for electricity, medium voltage)
  production volume
    Calculated from production volume of reference product using the relative outputs.
  properties: carbon content, fossil 0.00178991, carbon content, non-fossil 0.00178991, dry mass 0.337476 kg, water content 2962.17, wet mass 1000 kg
  note on carbon content, fossil: Assumed to be like in tap water. Bicarbonate content is 2.93 mol/m3. CO2 content is 0.1 mol/m3 (ecoinvent v2.2 report 8, Tab 93.1).

## Inputs from nature
- Water, river [natural resource, in water]: 0.03896 m3; name water_river_input; lognormal variance with pedigree 0.0606, pedigree (3,3,5,1,3)
  Modelled, based on "ISIC 2420" - pdf-document on the dedicated talk page of ecoinvent (www.ecoinvent.org/documentation).
  See section: Regarding "primary zinc production from concentrate, GLO 2003" dataset.
  Modelled, based on "ISIC 2420" - pdf-document on the dedicated talk page of ecoinvent (www.ecoinvent.org/documentation).
  See section: Regarding "primary zinc production from concentrate, GLO 2003" dataset.

## Emissions to nature
- Arsenic ion [air, non-urban air or from high stacks]: 1.264e-5 kg; lognormal variance with pedigree 0.694, pedigree (3,4,5,1,1)
  (same comment as for electricity, medium voltage)
- Dioxins, measured as 2,3,7,8-tetrachlorodibenzo-p-dioxin [air, non-urban air or from high stacks]: 5e-11 kg; lognormal variance with pedigree 1.37, pedigree (1,1,5,1,1)
  Estimation: The dioxin emissions are approximated with the reported emission factor of 50 μg-TEQ / t for secondary zinc production.
- Lead II [air, non-urban air or from high stacks]: 0.000104 kg; lognormal variance with pedigree 0.694, pedigree (3,4,5,1,1)
  Modelled, based on “ISIC 2420” - pdf-document on the dedicated talk page of ecoinvent (www.ecoinvent.org/documentation).
  See section: Regarding “primary zinc production from concentrate, GLO 2003” dataset.
  Further references:
  EEA (ed.) (2003) Primary Zinc Production (B335-1). In: EMEP / CORINAIR Emission Inventory Guidebook. February 2003 Edition Edition. European Enviornmental Agency, Online-Version under: <http://reports.eea.eu.int/technical_report_2001_3/en/en/tab_content_RLR>.
  EEA (ed.) (1999b) Primary Zinc Production (B335-1). In: EMEP / CORINAIR Emission Inventory Guidebook. 3rd edition October 2002 Update Edition. European Enviornmental Agency, Online-Version under: http://reports.eea.eu.int/ technical_report_2001_3/en/en/tab_content_RLR <http://reports.eea.eu.int/technical_report_2001_3/en/en/tab_content_RLR>.
  property water content 0; name water_content
- Mercury II [air, non-urban air or from high stacks]: 4e-6 kg; lognormal variance with pedigree 0.694, pedigree (3,4,5,1,1)
  Modelled, based on “ISIC 2420” - pdf-document on the dedicated talk page of ecoinvent (www.ecoinvent.org/documentation).
  See section: Regarding “primary zinc production from concentrate, GLO 2003” dataset.
  Further references:
  EEA (ed.) (2003) Primary Zinc Production (B335-1). In: EMEP / CORINAIR Emission Inventory Guidebook. February 2003 Edition Edition. European Enviornmental Agency, Online-Version under: <http://reports.eea.eu.int/technical_report_2001_3/en/en/tab_content_RLR>.
- Particulate Matter, < 2.5 um [air, non-urban air or from high stacks]: 0.000188 kg; lognormal variance with pedigree 0.354, pedigree (3,4,5,1,1)
  (same comment as for electricity, medium voltage)
- Particulate Matter, > 10 um [air, non-urban air or from high stacks]: 3.6e-5 kg; lognormal variance with pedigree 0.074, pedigree (3,4,5,1,1)
  (same comment as for electricity, medium voltage)
- Particulate Matter, > 2.5 um and < 10um [air, non-urban air or from high stacks]: 3.6e-5 kg; lognormal variance with pedigree 0.054, pedigree (3,4,5,1,1)
  (same comment as for electricity, medium voltage)
- Sulfur dioxide [air, non-urban air or from high stacks]: 0.017479 kg; lognormal variance with pedigree 0.054, pedigree (3,4,5,1,1)
  (same comment as for electricity, medium voltage)
- Water [air, unspecified]: 0.005844 m3; name water_to_air_unspecified; = (water_river_input*fraction_PW_to_air); lognormal variance with pedigree 0.08, pedigree (1,1,5,1,1)
  Calculated value based on literature values and expert opinion. See comments in the parametres' comment field.
  property fraction, origin: fresh water 1; name fraction_origin_fresh_water
  property fraction, origin: salt water 0; name fraction_origin_salt_water
  property fraction, origin: unspecified 0; name fraction_origin_unspecified
- Zinc II [air, non-urban air or from high stacks]: 0.00208 kg; lognormal variance with pedigree 0.694, pedigree (3,4,5,1,1)
  Modelled, based on “ISIC 2420” - pdf-document on the dedicated talk page of ecoinvent (www.ecoinvent.org/documentation).
  See section: Regarding “primary zinc production from concentrate, GLO 2003” dataset.
  Further references:
  EEA (ed.) (1999b) Primary Zinc Production (B335-1). In: EMEP / CORINAIR Emission Inventory Guidebook. 3rd edition October 2002 Update Edition. European Enviornmental Agency, Online-Version under: http://reports.eea.eu.int/ technical_report_2001_3/en/en/tab_content_RLR <http://reports.eea.eu.int/technical_report_2001_3/en/en/tab_content_RLR>.
- Arsenic ion [water, surface water]: 1.18e-6 kg; lognormal variance with pedigree 0.6907, pedigree (1,3,5,3,1)
  (same comment as for electricity, medium voltage)
- BOD5, Biological Oxygen Demand [water, surface water]: 0.00031093 kg; lognormal variance with pedigree 0.1181, pedigree (3,5,5,3,3)
  (same comment as for electricity, medium voltage)
- COD, Chemical Oxygen Demand [water, surface water]: 0.0004664 kg; lognormal variance with pedigree 0.1007, pedigree (3,3,5,3,3)
  (same comment as for electricity, medium voltage)
- Cadmium II [water, surface water]: 3.68e-6 kg; lognormal variance with pedigree 0.6907, pedigree (1,3,5,3,1)
  (same comment as for electricity, medium voltage)
- Copper ion [water, surface water]: 4e-6 kg; lognormal variance with pedigree 0.6907, pedigree (1,3,5,3,1)
  (same comment as for electricity, medium voltage)
- DOC, Dissolved Organic Carbon [water, surface water]: 0.00018237 kg; lognormal variance with pedigree 0.1181, pedigree (3,5,5,3,3)
  (same comment as for electricity, medium voltage)
- Fluoride [water, surface water]: 2.98e-5 kg; lognormal variance with pedigree 0.0987, pedigree (1,3,5,3,3)
  (same comment as for electricity, medium voltage)
- Lead II [water, surface water]: 4.2e-5 kg; lognormal variance with pedigree 0.6907, pedigree (1,3,5,3,1)
  (same comment as for electricity, medium voltage)
- Mercury II [water, surface water]: 1.724e-7 kg; lognormal variance with pedigree 0.6907, pedigree (1,3,5,3,1)
  (same comment as for electricity, medium voltage)
- TOC, Total Organic Carbon [water, surface water]: 0.00018237 kg; lognormal variance with pedigree 0.1181, pedigree (3,5,5,3,3)
  (same comment as for electricity, medium voltage)
- Zinc II [water, surface water]: 4.58e-5 kg; lognormal variance with pedigree 0.6907, pedigree (1,3,5,3,1)
  (same comment as for electricity, medium voltage)

## Sampling procedure
literature

## Extrapolations
see Technology This dataset has been copied from an original dataset covering the geography RER. The uncertainty has been adjusted accordingly.

## Review by Roland Hischier 2009-02-05
validated in version 1

## Review by Bo Weidema 2012-09-28
obsolete resource allocation correction removed
