# methylene diphenyl diisocyanate production

Dataset: EcoSpold 2, unit process
Geography: RoW
Time period: 2015-01-01 to 2022-12-31
Technology level: current
Classification: ISIC rev.4 ecoinvent: 2013:Manufacture of plastics and synthetic rubber in primary forms
Synonyms: Methylbisphenyl isocyanate; 4,4'-Diphenylmethane diisocyanate; Diphenylmethane diisocyanate; 4,4'-Methylenebis(phenyl isocyanate); Bis(4-isocyanatophenyl)methane
Scenario: Business-as-Usual
System model: Substitution, consequential, long-term
Generated by: Lucia Valsasina
Database: ecoinvent
isCopyrightProtected: true

## General comment
Methylene diphenyl diisocyanate is an aromatic diisocyanate. MDI is used in the production of polyurethane in combination with polyols (Boustead 2005). In 2012 the largest producer of MDI globally was Bayer, producing 1.24 million tonnes per year, followed by Wanhua Group, producing 1.1 million tonnes per year (Gal, 2012).
Reference(s):
Gendorf. 2016. Umwelterklärung 2015, Werk Gendorf Industriepark, www.gendorf.de
Boustead. 2005. Eco-profiles of the European Plastics Industry Diphenylmethane diisocyanate (MDI). Retrieved from: http://www.polyurethanes.org/uploads/documents/eco_midi.pdf, accessed 26 January 2017
Gal, J. 2012. Wanhua to the rescue of BorsodChem. ICIS Chemical Business. Retrieved from: http://www.icis.com/resources/news/2012/02/20/9533156/wanhua-to-the-rescue-of-borsodchem/, accessed 26 Janury 2017
Heino Falcke, Simon Holbrook, Iain Clenahan,
Alfredo Lopez Carretero, Teoman Sanalan,
Thomas Brinkmann, Joze Roth, Benoit Zerger
Serge Roudier, Luis Delgado Sancho (2017): Best Available Techniques (BAT) Reference Document for the Production of large Volume Organic Chemicals
For more information on the model please refer to the dedicate ecoinvent report, access it in the Report section of ecoQuery (http://www.ecoinvent.org/login-databases.html)

## Included activities start
The activity starts when the raw materials enter the process.

## Included activities end
Materials entering the process are included as well as energy uses, infrastructure and emissions.

## Geography
The inputs to the process are calculated based on stoichiometry and literature data, they are therefore considered to be valid for the chosen geography. The inputs of heat, electricity, water, factory and nitrogen are mostly taken as average of industry data. Industry data values are a 5-year average of data (2011 - 2015) published by the Gendorf factory (Gendorf, 2016, Umwelterklärung, www.gendorf.de), (Gendorf, 2015, Umwelterklärung, www.gendorf.de), (Gendorf, 2014, Umwelterklärung, www.gendorf.de). The Gendorf factory is based in Germany, it produces a wide range of chemical substances. The factory produced 1657400 tonnes of chemical substances in the year 2015 (Gendorf, 2016, Umwelterklärung, www.gendorf.de) and 740000 tonnes of intermediate products. Given the range of chemicals produced by the german site, the values are used for the GLO geography, with uncertainty adjusted accordingly.

## Technology
MDI production starts from aromatic hydrocarbons, which are used to produce diamines which then undergo phosgenation to produce the final product.
The flows for electricity and heat are taken from Boustead (2005). For more information on the process and the assumptions made, please see Boustead (2005) report. The report is part of a series of Eco-profiles commissioned by Plastics Europe.
Chemical Reaction:
2 C6H7N + CH2O + 2 CCl2O → C15H10N2O2 + 6 HCl
A process efficiency of 95% is assumed.
The formed hydrochloric acid is treated as a valuable by-product.
This inventory representing production of a particular chemical compound is at least partially based on a generic model on the production of chemicals. The data generated by this model have been improved by compound-specific data when available.
The model on production of chemicals is using specific industry or literature data wherever possible and more generic data on chemical production processes to fill compound-specific data gaps when necessary. The basic principles of the model have been published in literature (Hischier 2005, Establishing Life Cycle Inventories of Chemicals Based on Differing Data Availability). The model has been updated and extended with newly available data from the chemical industry.
In the model, unreacted fractions are treated in a waste treatment process, and emissions reported are after a waste treatment process that is included in the scope of this dataset. For volatile reactants, a small level of evaporation is assumed. Solvents and catalysts are mostly recycled in closed-loop systems within the scope of the dataset and reported flows are for losses from this system.
The main source of information for the values for heat, electricity, water (process and cooling), nitrogen, chemical factory is industry data from Gendorf. The values are a 5-year average of data (2011 - 2015) published by the Gendorf factory (Gendorf, 2016, Umwelterklärung, www.gendorf.de), (Gendorf, 2015, Umwelterklärung, www.gendorf.de), (Gendorf, 2014, Umwelterklärung, www.gendorf.de). The Gendorf factory is based in Germany, it produces a wide range of chemical substances. The factory produced 1657400 tonnes of chemical substances in the year 2015 (Gendorf, 2016, Umwelterklärung, www.gendorf.de) and 740000 tonnes of intermediate products.
Reference(s):
Hischier, R. (2005) Establishing Life Cycle Inventories of Chemicals Based on Differing Data Availability (9 pp). The International Journal of Life Cycle Assessment, Volume 10, Issue 1, pp 59–67. 10.1065/lca2004.10.181.7
Gendorf. 2016. Umwelterklärung 2015, Werk Gendorf Industriepark, www.gendorf.de
Boustead. 2005. Eco-profiles of the European Plastics Industry Diphenylmethane diisocyanate (MDI). Retrieved from: http://www.polyurethanes.org/uploads/documents/eco_midi.pdf, accessed 26 January 2017
Heino Falcke, Simon Holbrook, Iain Clenahan,
Alfredo Lopez Carretero, Teoman Sanalan,
Thomas Brinkmann, Joze Roth, Benoit Zerger
Serge Roudier, Luis Delgado Sancho (2017): Best Available Techniques (BAT) Reference Document for the Production of large Volume Organic Chemicals
Gal, J. 2012. Wanhua to the rescue of BorsodChem. ICIS Chemical Business. Retrieved from: http://www.icis.com/resources/news/2012/02/20/9533156/wanhua-to-the-rescue-of-borsodchem/, accessed 26 Janury 2017
For more information on the model please refer to the dedicate ecoinvent report, access it in the Report section of ecoQuery (http://www.ecoinvent.org/login-databases.html)

## Time period
The activity is based on stoichiometry and literature data, it is therefore considered not to change significantly over time in terms of inputs. The inputs of heat, electricity, water, factory and nitrogen are mostly taken as average of industry data. Industry data values are a 5-year average of data (2011 - 2015) published by the Gendorf factory (Gendorf, 2016, Umwelterklärung, www.gendorf.de), (Gendorf, 2015, Umwelterklärung, www.gendorf.de), (Gendorf, 2014, Umwelterklärung, www.gendorf.de). The Gendorf factory is based in Germany, it produces a wide range of chemical substances. The factory produced 1657400 tonnes of chemical substances in the year 2015 (Gendorf, 2016, Umwelterklärung, www.gendorf.de) and 740000 tonnes of intermediate products. The time period is therefore set based on the years from Gendorf reference.

## Reference product
- methylene diphenyl diisocyanate: 1 kg; name RP; By-product classification allocatable product; CPC 347: Plastics in primary forms; CAS 101-68-8
  MDI is an aromatic diisocyanate. MDI is used in the production of polyurethane in combination with polyols (Boustead 2005). In 2012 the largest producer of MDI globally was Bayer, producing 1.24 million tonnes per year, followed by Wanhua Group, producing 1.1 million tonnes per year (Gal, 2012).
  Reference(s):
  Gendorf. 2016. Umwelterklärung 2015, Werk Gendorf Industriepark, www.gendorf.de
  Boustead. 2005. Eco-profiles of the European Plastics Industry Diphenylmethane diisocyanate (MDI). Retrieved from: http://www.polyurethanes.org/uploads/documents/eco_midi.pdf, accessed 26 January 2017
  Gal, J. 2012. Wanhua to the rescue of BorsodChem. ICIS Chemical Business. Retrieved from: http://www.icis.com/resources/news/2012/02/20/9533156/wanhua-to-the-rescue-of-borsodchem/, accessed 26 Janury 2017
  production volume 7.87116e9 kg
    The annual Global production volume is approximated with the annual production capacity.
    The capacity of methylene diphenyl diisocyanate in 2018 is 9.79E+9 kg.
    References:
    ECTC chemical technologies (2019): Isocyanates production: Global and Russian Isocyanate Market Overview, available here: https://ect-center.com/blog-en/global-isocyanate-market, accessed 16-06-2022.
  property heating value, net 26.66 MJ
    LHV is calculated based on the elemental composition of the substance. Based on the name of the substance, the chemical formula of the substance is assumed to be: C15H10N2O2
  property price 1.51805 EUR2005
    Average price (2017-2020), based on https://comtrade.un.org/, accessed 2021-07-30.
    The prices were converted to EUR based on the annual exchange rates published by the European Central Bank (https://sdw.ecb.europa.eu/quickview.do?SERIES_KEY=120.EXR.A.USD.EUR.SP00.A, last accessed on 2022-02-15) and adjusted for inflation relative to 2005 using the producer price index (PPI) of the euro area, published by eurostat (https://appsso.eurostat.ec.europa.eu/nui/show.do?dataset=sts_inpp_a&lang=en, last accessed on 2022-05-04).
  properties: carbon allocation 0.719921 kg, carbon content 0.719921, carbon content, fossil 0.719921, carbon content, non-fossil 0, dry mass 1 kg, water content 0, water in wet mass 0 kg, wet mass 1 kg

## Inputs from technosphere
- aniline: 0.783434 kg; lognormal variance with pedigree 0.010025, pedigree (2,3,2,2,3)
  Calculated value based on stoichiometric calculations and literature data.
  93.12832g/mol is the molar mass of aniline (C6H7N).
  250.25668g/mol is the molar mass of methylene diphenyldiisocyanate (C15H10N2O2).
  MDI production starts from aromatic hydrocarbons, which are used to produce diamines which then undergo phosgenation to produce the final product.
  The flows for electricity and heat are taken from Boustead (2005). For more information on the process and the assumptions made, please see Boustead (2005) report. The report is part of a series of Eco-profiles commissioned by Plastics Europe.
  Chemical Reaction:
  2 C6H7N + CH2O + 2 COCl2 → C15H10N2O2 + 4 HCl + H2O
  A process efficiency of 95% is assumed.
  properties: carbon content, fossil 0.774194, dry mass 1 kg, heating value, net 32.56 MJ, wet mass 1 kg
- chemical factory, organics: 4e-10 unit; lognormal variance with pedigree 0.31, pedigree (2,3,2,4,3)
  Calculated based on literature data published by the industry. For this activity, no information was readily available concerning infrastructure and land-use. Therefore, the infrastructure is estimated based on data from two chemical factories, the BASF site of Ludwigshafen and the chemical factory in Gendorf (which are both located in Germany), which produce a wide range of chemical substances. Based on this data, the following assumptions are made: the built area amounts to about 4.2 ha, the plant has an average output of 50'000 t/a and a lifespan of fifty years. The estimated infrastructure amount is therefore 4.00 E-10 units per kg of produced chemical.
  References:
  Althaus H.-J., Chudacoff M., Hischier R., Jungbluth N., Osses M. and Primas A. (2007) Life Cycle Inventories of Chemicals. ecoinvent report No. 8, v2.0. EMPA Dübendorf, Swiss Centre for Life Cycle Inventories, Dübendorf, CH.
  Gendorf (2000) Umwelterklärung 2000, Werk Gendorf. Werk Gendorf, Burgkirchen.
- electricity, medium voltage: 0.0190596, 0.0132043, 0.000707743, 0.157255, 0.000713119, 0.00906042 kWh (6 suppliers, which the file names only by identifier); sum of these 0.2 kWh; lognormal variance with pedigree 0.010025, pedigree (2,3,2,2,3)
  Literature value. The flows for electricity and heat are taken from Boustead (2005). For more information on the process and the assumptions made, please see Boustead (2005) report. The report is part of a series of Eco-profiles commissioned by Plastics Europe.
  Reference(s):
  Boustead. 2005. Eco-profiles of the European Plastics Industry Diphenylmethane diisocyanate (MDI). Retrieved from: http://www.polyurethanes.org/uploads/documents/eco_midi.pdf, accessed 26 January 2017
- formaldehyde: 0.126297 kg; lognormal variance with pedigree 0.010025, pedigree (2,3,2,2,3)
  Calculated value based on stoichiometric calculations and literature data.
  30.02628g/mol is the molar mass of formaldehyde (CH2O).
  250.25668g/mol is the molar mass of methylene diphenyldiisocyanate (C15H10N2O2).
  MDI production starts from aromatic hydrocarbons, which are used to produce diamines which then undergo phosgenation to produce the final product.
  The flows for electricity and heat are taken from Boustead (2005). For more information on the process and the assumptions made, please see Boustead (2005) report. The report is part of a series of Eco-profiles commissioned by Plastics Europe.
  Chemical Reaction:
  2 C6H7N + CH2O + 2 COCl2 → C15H10N2O2 + 4 HCl + H2O
  A process efficiency of 95% is assumed.
  properties: carbon content, fossil 0.4, dry mass 1 kg, heating value, net 20.19 MJ, wet mass 1 kg
- heat, from steam, in chemical industry: 3.42 MJ; lognormal variance with pedigree 0.010025, pedigree (2,3,2,2,3)
  (same comment as for electricity, medium voltage)
  properties: heating value, net 1 MJ
- hydrochloric acid, without water, in 30% solution state: -0.58276 kg; name BP_HCl; lognormal variance with pedigree 0.2106, pedigree (5,5,5,5,5)
  Calculated value based on stoichiometric calculations and literature data.
  MDI production starts from aromatic hydrocarbons, which are used to produce diamines which then undergo phosgenation to produce the final product.
  The flows for electricity and heat are taken from Boustead (2005). For more information on the process and the assumptions made, please see Boustead (2005) report. The report is part of a series of Eco-profiles commissioned by Plastics Europe.
  Chemical Reaction:
  2 C6H7N + CH2O + 2 COCl2 → C15H10N2O2 + 4 HCl + H2O
  A process efficiency of 95% is assumed.
  production volume
    Calculated from production volume of reference product using the relative outputs.
  properties: dry mass 1 kg, heating value, net 3.32 MJ, price 0.127 EUR2005, wet mass 1 kg
- nitrogen, liquid: 0.019 kg; lognormal variance with pedigree 0.0106, pedigree (2,3,2,4,3)
  Calculated based on literature data published by the industry. This value is a 5-year average of data (2011 - 2015) published by the Gendorf factory (Gendorf, 2016, Umwelterklärung, www.gendorf.de), (Gendorf, 2015, Umwelterklärung, www.gendorf.de), (Gendorf, 2014, Umwelterklärung, www.gendorf.de). The amount of nitrogen used per kg of chemical substance produced is calculated using literature data published by the Gendorf factory based in Germany, which produces a wide range of chemical substances. The factory produced 1657400 tonnes of chemical substances in the year 2015 (Gendorf, 2016, Umwelterklärung, www.gendorf.de) and 740000 tonnes of intermediate products. The reported amount of nitrogen used in 2015 was 33512400 Nm3 (Gendorf, 2016, Umwelterklärung, www.gendorf.de). One Nm3 of nitrogen is equal to 1.2506 kg. The resulting amount of nitrogen - the 5-year average (2011 - 2015, weighted by production volume) is 0.019 kg/kg. Nitrogen is mainly used during the production of chemicals for 'blanketing', which is the process of applying gas to the vapour space of a container or vessel in order to control its composition.
  properties: dry mass 1 kg, wet mass 1 kg
- phosgene, liquid: 0.832121 kg; lognormal variance with pedigree 0.010025, pedigree (2,3,2,2,3)
  Calculated value based on stoichiometric calculations and literature data.
  98.9158g/mol is the molar mass of phosgene, liquid (CCl2O).
  250.25668g/mol is the molar mass of methylene diphenyldiisocyanate (C15H10N2O2).
  MDI production starts from aromatic hydrocarbons, which are used to produce diamines which then undergo phosgenation to produce the final product.
  The flows for electricity and heat are taken from Boustead (2005). For more information on the process and the assumptions made, please see Boustead (2005) report. The report is part of a series of Eco-profiles commissioned by Plastics Europe.
  Chemical Reaction:
  2 C6H7N + CH2O + 2 COCl2 → C15H10N2O2 + 4 HCl + H2O
  A process efficiency of 95% is assumed.
  properties: carbon content, fossil 0.122449, dry mass 1 kg, heating value, net 3.68 MJ, wet mass 1 kg
- tap water: 0.000633753, 0.00318571, 0.00118255, 1.0659e-5, 0.000415735, 0.0159807, 0.00459085 kg (7 suppliers, which the file names only by identifier); sum of these 0.026 kg; lognormal variance with pedigree 0.0106, pedigree (2,3,2,4,3)
  Calculated based on literature data published by the industry. This value is a 5-year average of data (2011 - 2015) published by the Gendorf factory (Gendorf, 2016, Umwelterklärung, www.gendorf.de), (Gendorf, 2015, Umwelterklärung, www.gendorf.de), (Gendorf, 2014, Umwelterklärung, www.gendorf.de). The amount of tap water per kg of chemical substance produced is calculated using literature data published by the Gendorf factory based in Germany, which produces a wide range of chemical substances. The factory produced 1657400 tonnes of chemical substances in the year 2015 (Gendorf, 2016, Umwelterklärung, www.gendorf.de) and 740000 tonnes of intermediate products. The amount of tap water consumed in the year 2015 was 55100 tonnes (Gendorf, 2016, Umwelterklärung, www.gendorf.de). The resulting amount of tap water is 0.023 kg/kg of chemical product produced. The 5-year average (2011 - 2015, weighted by production volume) is 0.026 kg/kg.
  properties: carbon content, fossil 0.00178991, dry mass 0.000337476 kg, water content 2962.17, wet mass 1 kg
  note on carbon content, fossil: Bicarbonate content is 2.93 mol/m3. CO2 content is 0.1 mol/m3 (ecoinvent v2.2 report 8, Tab 93.1).
- wastewater, average: -9.57892e-9, -2.69042e-6 m3 (2 suppliers, which the file names only by identifier); sum of these -2.7e-6 m3; lognormal variance with pedigree 0.0104, pedigree (2,3,1,4,3)
  Calculated based on literature data published by the industry. This value is a 5-year average of data (2011 - 2015) published by the Gendorf factory (Gendorf, 2016, Umwelterklärung, www.gendorf.de), (Gendorf, 2015, Umwelterklärung, www.gendorf.de), (Gendorf, 2014, Umwelterklärung, www.gendorf.de). The amount of wastewater (which is later on treated in the municipal WWTP) per kg of chemical substance produced is calculated using literature data published by the Gendorf factory based in Germany, which produces a wide range of chemical substances. The factory produced 1657400 tonnes of chemical substances in the year 2015 (Gendorf, 2016, Umwelterklärung, www.gendorf.de) and 740000 tonnes of intermediate products. The amount of wastewater which is later on treated in the municipal WWTP in the year 2015 was 1200 tonnes (Gendorf, 2016, Umwelterklärung, www.gendorf.de). The resulting amount of wastewater is 2.7E-06 m3/kg of chemical product produced.
  production volume
    Calculated from the production volume of the reference product in proportion to the respective output amounts.
  properties: carbon content, non-fossil 0.194039, dry mass 0.346837 kg, water content 2882.2, wet mass 1000 kg
  note on carbon content, non-fossil: 0.0673 kg TOC/m3 (Tab A.17, ecoinvent v2.2 report 13_I). TOC was considered as Total Carbon.

## Inputs from nature
- Water, cooling, unspecified natural origin [natural resource, in water]: 0.0164 m3; lognormal variance with pedigree 0.0106, pedigree (2,3,2,4,3)
  Calculated based on literature data published by the industry. This value is a 5-year average of data (2011 - 2015) published by the Gendorf factory (Gendorf, 2016, Umwelterklärung, www.gendorf.de), (Gendorf, 2015, Umwelterklärung, www.gendorf.de), (Gendorf, 2014, Umwelterklärung, www.gendorf.de). The amount of water for cooling extracted per kg of chemical substance produced is calculated using literature data published by the Gendorf factory based in Germany, which produces a wide range of chemical substances. The factory produced 1657400 tonnes of chemical substances in the year 2015 (Gendorf, 2016, Umwelterklärung, www.gendorf.de) and 740000 tonnes of intermediate products. The reported amounts of water extracted as groundwater and surface water (river) are assumed to be used entirely for cooling purposes.
- Water, river [natural resource, in water]: 0.00086 m3; lognormal variance with pedigree 0.0106, pedigree (2,3,2,4,3)
  Calculated based on literature data published by the industry. This value is a 5-year average of data (2011 - 2015) published by the Gendorf factory (Gendorf, 2016, Umwelterklärung, www.gendorf.de), (Gendorf, 2015, Umwelterklärung, www.gendorf.de), (Gendorf, 2014, Umwelterklärung, www.gendorf.de). The amount of groundwater and surface water (river) extracted per kg of chemical substance produced is calculated using literature data published by the Gendorf factory based in Germany, which produces a wide range of chemical substances. The factory produced 1657400 tonnes of chemical substances in the year 2015 (Gendorf, 2016, Umwelterklärung, www.gendorf.de) and 740000 tonnes of intermediate products. The amount of groundwater and surface water (river) extracted in the year 2015 was 19950000 tonnes and 21488100 tonnes respectively (Gendorf, 2016, Umwelterklärung, www.gendorf.de).
- Water, well, in ground [natural resource, in water]: 0.00083 m3; lognormal variance with pedigree 0.0106, pedigree (2,3,2,4,3)
  (same comment as for Water, river)

## Emissions to nature
- Carbon dioxide, fossil [air, unspecified]: 0.105515 kg; lognormal variance with pedigree 0.0106, pedigree (2,3,2,4,3)
  Calculated value. The values is based on a generic model. The basic principles of the model have been published in literature (Hischier 2005, Establishing Life Cycle Inventories of Chemicals Based on Differing Data Availability). The model has been updated and extended with newly available data from the chemical industry. Find more information in the dedicated report on the ecoinvent website.
  Reference(s):
  Hischier, R. (2005) Establishing Life Cycle Inventories of Chemicals Based on Differing Data Availability (9 pp). The International Journal of Life Cycle Assessment, Volume 10, Issue 1, pp 59–67. 10.1065/lca2004.10.181.7
- Formaldehyde [air, unspecified]: 0.00631484 kg; lognormal variance with pedigree 0.0106, pedigree (2,3,2,4,3)
  (same comment as for Carbon dioxide, fossil)
- Nitrogen [air, unspecified]: 0.019 kg; lognormal variance with pedigree 0.0106, pedigree (2,3,2,4,3)
  Calculated value. The amount of nitrogen released to air is equal to the amount of nitrogen entering the activity.
- Phosgene [air, unspecified]: 0.00041606 kg; lognormal variance with pedigree 0.0106, pedigree (2,3,2,4,3)
  (same comment as for Carbon dioxide, fossil)
- Water [air, unspecified]: 0.0014 m3; lognormal variance with pedigree 0.0106, pedigree (2,3,2,4,3)
  Calculated to ensure the water balance. In general, in the case of recirculating cooling systems, 77% of the water input evaporates to air. In case of once-through cooling systems, 4% of the water input evaporates to air. The process water has in the chemical industry an average evaporation rate of 20.5%. In the specific case of the Gendorf factory, the calculated evaporation rate based on the data published is 6.3%. This matches the qualitative information, that the majority of the cooling systems in Gendorf are once-through and that the amount of cooling water used is significantly higher than the amount of process water used (Gendorf, 2016, Umwelterklärung, www.gendorf.de).
- Aniline [water, unspecified]: 0.00195859 kg; lognormal variance with pedigree 0.0106, pedigree (2,3,2,4,3)
  (same comment as for Carbon dioxide, fossil)
- BOD5, Biological Oxygen Demand [water, unspecified]: 0.00500707 kg; lognormal variance with pedigree 0.218, pedigree (4,5,5,5,5)
  Calculated value. The BOD, COD, TOC and BOD5 are calculated based on the amount and type of emissions released to water in the same activity.
- COD, Chemical Oxygen Demand [water, unspecified]: 0.00500707 kg; lognormal variance with pedigree 0.218, pedigree (4,5,5,5,5)
  (same comment as for BOD5, Biological Oxygen Demand)
- Chloride [water, unspecified]: 0.0283331 kg; lognormal variance with pedigree 0.0106, pedigree (2,3,2,4,3)
  (same comment as for Carbon dioxide, fossil)
- DOC, Dissolved Organic Carbon [water, unspecified]: 0.00151423 kg; lognormal variance with pedigree 0.218, pedigree (4,5,5,5,5)
  (same comment as for BOD5, Biological Oxygen Demand)
- Nitrate [water, unspecified]: 0.0247765 kg; lognormal variance with pedigree 0.0106, pedigree (2,3,2,4,3)
  (same comment as for Carbon dioxide, fossil)
- TOC, Total Organic Carbon [water, unspecified]: 0.00151423 kg; lognormal variance with pedigree 0.218, pedigree (4,5,5,5,5)
  (same comment as for BOD5, Biological Oxygen Demand)
- Water [water, unspecified]: 0.0167 m3; lognormal variance with pedigree 0.0106, pedigree (2,3,2,4,3)
  Calculated based on literature data published by the industry (Gendorf, 2016, Umwelterklärung, www.gendorf.de). The amount of water released back to the environment consists of the amount of process water treated in the internal WWTP and then released back to the environment and the amount of cooling water released back to the environment.

## Sampling procedure
Literature data and stoichiometric calculation. This inventory is partially based on a generic model of the production of chemicals. The data generated by this model have been improved with compound-specific data when available.
The model of the production of chemicals is using specific industry or literature data wherever possible and more generic data on chemical production processes to fill compound-specific data gaps when necessary. The basic principles of the model have been published in literature (Hischier, 2005). The model has been updated and extended with newly available data from the chemical industry.
In the model, unreacted fractions are treated in a waste treatment process, and emissions reported are after a waste treatment process that is included in the scope of this dataset. For volatile reactants, a small level of evaporation is assumed. Solvents and catalysts are mostly recycled in closed-loop systems within the scope of the dataset and reported flows are for losses from this system.
The main source of information for the values for heat, electricity, water (process and cooling), nitrogen, chemical factory is industry data from the GENDORF Chemical Park. The values are a 5-year average of data from 2015 to 2019 published by the GENDORF Chemical Park, which is based in Germany and produced an average of 2462760 tonnes of chemical substances in the years 2015-2019.

Reference(s):
Hischier, R. (2005) Establishing Life Cycle Inventories of Chemicals Based on Differing Data Availability (9 pp). The International Journal of Life Cycle Assessment, Volume 10, Issue 1, pp 59-67. 10.1065/lca2004.10.181.7
Chemiepark GENDORF, Umwelterklärung 2016, https://www.gendorf.de/Nachbarn/Umweltschutz/Industrie%20und%20Nachhaltigkeit
Chemiepark GENDORF, Umwelterklärung 2017, https://www.gendorf.de/Nachbarn/Umweltschutz/Industrie%20und%20Nachhaltigkeit
Chemiepark GENDORF, Umwelterklärung 2020, https://www.gendorf.de/Nachbarn/Umweltschutz/Industrie%20und%20Nachhaltigkeit

## Review by Emilia Moreno Ruiz 2017-08-10
This dataset was additionally reviewed in a separate review process by Eric Johnson of Atlantic Consulting as well as Emilia Moreno Ruiz and Gregor Wernet of ecoinvent.

## Review by Eric Johnson 2022-06-17
accepted
