# butter production, from cream, from cow milk

Dataset: EcoSpold 2, unit process
Geography: GLO
Time period: 2007-01-01 to 2022-12-31
Technology level: current
Classification: ISIC rev.4 ecoinvent: 1050:Manufacture of dairy products
Scenario: Business-as-Usual
System model: Substitution, consequential, long-term
Share of production covered: 9.5 %
Generated by: Tereza Levova
Database: ecoinvent
isCopyrightProtected: true

## General comment
Butter is a dairy product made by churning fresh or fermented cream or milk. This activity covers main flows related to butter production from cream.
The process of buttermaking is basically a mechanical one in which cream, an emulsion of oil in water, is transformed to butter, an emulsion of water in oil. This is achieved by a process of batch or continuous churning.
The wet mass and water in wet mass is not balanced in this inventory because the emphasis was put on fat content balance.
Source: European Comission, IPPC, 2006, Reference Document on BAT in the Food, Milk and Drink Industries

## Included activities start
This activity starts when the cream enters the dairy gate.

## Included activities end
This activity end when the finished product - butter - is ready to leave the gates of the dairy. Packaging is not included in this inventory.

## Technology
A number of continuous techniques are available such as methods in which cream is subjected to high speed churning and continuous working. The main steps of buttermaking are always the same.
Scheme of butter manufacture from cream (EU Commission, IPPC, 2006, Reference Document on Best Available Techniques in the Food, Drink and Milk Industries).

## Parameters
- fraction, process water, to air: 0.15 dimensionless; name fraction_PW_to_air; lognormal variance with pedigree 0.092025, pedigree (4,4,3,2,4)
  Literature value. In case when no industry/process specific data are available, default evaporation fraction value is used. This value is 15% and is based on literature (Statistics Canada, 2007 & Shaffer, K.H., 2008, Consumptive water use in the Great Lakes Basin, USGS & Shiklomanov, 2003, World Water Resources at the Beginning of the 21st Century) and has been approved by an expert.
- fraction, tap water, to air: 0.15 dimensionless; name fraction_TW_to_air; = fraction_PW_to_air; lognormal variance with pedigree 0.092025, pedigree (4,4,3,2,4)
  Calculated value. See comment in the other parametres present in this dataset. Tap water is considered to be always used as process water, thus process water fractions to air are applied to all tap water input flows to calculate the amount of water consumed in the processes.

## Reference product
- cream, from cow milk: 1 kg; = 18.9/3.78; By-product classification allocatable product; CPC 22241: Butter and other fats and oils derived from milk of cattle; lognormal variance with pedigree 0.0458, pedigree (3,4,5,4,2)
  Calculated based on literature value (Djekic, 2013, Environmental life-cycle assessment of various dairy products) the amount of milk needed to produce 1kg of cream is approximatelly 3.8kg. According to literature (Nilsson K., 2010, Comparative life cycle assessment of margarine and butter consumed in the UK, Germany and France) the amount of milk needed in order to produce 1kg of butter is 18.9kg. Thus the amount of cream needed to produce 1kg of butter is calculated to be 5kg.
  production volume 1 kg
  properties: carbon allocation 0.205478 kg, carbon content 0.6847, carbon content, fossil 0, carbon content, non-fossil 0.6847, dry mass 0.3001 kg, fat (total lipid) content 0.241 kg, price 0 EUR2005, water content 2.33222, water in wet mass 0.6999 kg, wet mass 1 kg

## Inputs from technosphere
- butter, from cow milk: 0.2 kg; name RP_amount_1
  production volume
    Calculated based on literature value.
    4895069.52 ton is the amount of butter, from cow milk produced in the world in 2011 (FAOstat, accessed 20130122).
    It is estimated that half of the butter is produced from cream and half directly from milk.
  property ash content 0.000487448 kg; name ash_C_butter; = 1/DM_butter*0.0004
  property carbohydrates content 0.000731172 kg; name carbohydrates_C_butter; = 1/DM_butter*0.0006
  property dry mass 0.8206 kg; name DM_butter; = WM_butter-WWM_butter
  property fat (total lipid) content 0.988423 kg; name fat_C_butter; = 1/DM_butter*0.8111
  property fibre (total dietary) content 0 kg; name fibre_C_butter; = 1/DM_butter*0
  property protein content 0.0103583; name protein_C_butter; = 1/DM_butter*0.0085
  property water in wet mass 0.1794 kg; name WWM_butter
  properties: carbon content, non-fossil 0.747144, price 2.49 EUR2005, water content 0.218621, wet mass 1 kg
  note on ash content: Calculated based on literature value (USDA, National Nutrient Database for Standard Reference, "Butter, without salt", accessed 20130121).
  note on carbon content, non-fossil: Calculated value. Biogene carbon content on a dry matter basis.
- buttermilk, from cow milk: 0.202 kg; name BP_amount_2; source Nilsson, K. 2010; lognormal variance with pedigree 0.0078, pedigree (3,4,3,4,2)
  Calculated based on dry/wet mass balance.
  production volume
    Calculated from production volume of reference product using the relative outputs.
  property ash content 0.0562448 kg; name ash_C_buttermilk; = 1/DM_buttermilk*0.0068
  property carbohydrates content 0.403639 kg; name carbohydrates_C_buttermilk; = 1/DM_buttermilk*0.0488
  property dry mass 0.1209 kg; name DM_buttermilk; = WM_buttermilk-WWM_buttermilk
  property fat (total lipid) content 0.27378 kg; name fat_C_buttermilk; = 1/DM_buttermilk*0.0331
  property fibre (total dietary) content 0 kg; name fibre_C_buttermilk; = 1/DM_buttermilk*0
  property protein content 0.265509; name protein_C_buttermilk; = 1/DM_buttermilk*0.0321
  property water in wet mass 0.8791 kg; name WWM_buttermilk
  properties: carbon content, non-fossil 0.531729, price 1.1 EUR2005, water content 7.2713, wet mass 1 kg
  note on ash content: Calculated based on literature value (USDA, National Nutrient Database for Standard Reference, "Milk, buttermilk, fluid, whole", accessed 20130121).
- dairy: -4.63909e-5 m3; = 1/dairy_lifetime_capacity*18.9/dairy_lifetime
  Calculated value.
  18.9 l is the amount of milk needed to produce 1kg of butter.
  property lifetime 20 year; name dairy_lifetime
  property lifetime capacity [kg] 4074.07 kg; name dairy_lifetime_capacity; = 2.2E6/(10*18*3)
  note on lifetime capacity [kg]: Calculated based on literature value. The lifetime capacity might vary a lot dipending on the size of the dairy. This dairy of volume of (18*10*3=) 540m3 has a capacity of 2.2E6 kg of process milk/year. This milk can be processed to many different products such as cheese, butter or yogurt.
- electricity, medium voltage: -0.136861 kWh; = (UnitConversion(3.79, 'MJ', 'kWh'))*(1-0.35); lognormal variance with pedigree 0.0458, pedigree (3,4,5,4,2)
  Calculated based on literature value. According to literature (Djekic, 2013, Environmental life-cycle assessment of various dairy products) the amount ofelectricity needed for producing cream from raw milk is approximatelly 35% from the total amount of electricity needed when producing butter from raw milk. These 35% have been deducted in this exchange since the raw milk to cream step is not included in the bounderies of this activity.
- heat, district or industrial, natural gas: -0.621298 MJ; = 3.57068*(1-0.13); lognormal variance with pedigree 0.0458, pedigree (3,4,5,4,2)
  Calculated based on literature value. According to literature (Djekic, 2013, Environmental life-cycle assessment of various dairy products) the amount of thermal energy needed for producing cream from raw milk is approximatelly 13% from the total thermal energy needed when producing butter from raw milk. These 13% have been deducted in this exchange since the raw milk to cream step is not included in the bounderies of this activity.
  properties: heating value, net 1 MJ
- heat, district or industrial, other than natural gas: -0.0259817 MJ; = 0.14932*(1-0.13); lognormal variance with pedigree 0.0458, pedigree (3,4,5,4,2)
  (same comment as for heat, district or industrial, natural gas)
  properties: heating value, net 1 MJ
- nitric acid, without water, in 50% solution state: -8.98976e-7, -5.07764e-7, -3.0919e-6, -7.51666e-7, -7.54459e-7, -6.60563e-6, -1.8762e-6, -2.43994e-6, -5.72834e-6, -8.15125e-7 kg (10 suppliers, which the file names only by identifier); sum of these -2.347e-5 kg; = 0.011735*(0.01); lognormal variance with pedigree 0.0458, pedigree (3,4,5,4,2)
  Calculated based on literature value. According to literature (Djekic, 2013, Environmental life-cycle assessment of various dairy products) the amount of nitric acid needed for producing cream from raw milk is approximatelly 1% from the total amount of nitric acid needed when producing butter from raw milk. These 1% have been deducted in this exchange since the raw milk to cream step is not included in the bounderies of this activity.
  properties: dry mass 1 kg, wet mass 1 kg
- skimmed milk, from cow milk: 1.376 kg; name BP_amount_1; lognormal variance with pedigree 0.0078, pedigree (3,4,3,4,2)
  Estimated based on dry mass balance.
  production volume
    Calculated from production volume of reference product using the relative outputs.
  property ash content 0.0818777 kg; name ash_C_skimmed_milk; = 1/DM_skimmed_milk*0.0075
  property carbohydrates content 0.541485 kg; name carbohydrates_C_skimmed_milk; = 1/DM_skimmed_milk*0.0496
  property dry mass 0.0916 kg; name DM_skimmed_milk; = WM_skimmed_milk-WWM_skimmed_milk
  property fat (total lipid) content 0.00873362 kg; name fat_C_skimmed_milk; = 1/DM_skimmed_milk*0.0008
  property fibre (total dietary) content 0 kg; name fibre_C_skimmed_milk
  property protein content 0.367904; name protein_C_skimmed_milk; = 1/DM_skimmed_milk*0.0337
  property water in wet mass 0.9084 kg; name WWM_skimmed_milk
  properties: carbon content, non-fossil 0.450622, price 0.337 EUR2005, water content 9.91703, wet mass 1 kg
  note on ash content: Calculated based on literature data (USDA, National Nutrient Database for Standard Reference, accessed 20130123), "Milk, nonfat, fluid, without added vitamin A and vitamin D (fat free or skim)".
  note on carbon content, non-fossil: Calculated value based on literature values (Kay, A.D.; Vrede, T., 2010, Evolutionary and Biochemical Aspects, Global Ecology, Elsevier B.V., S.E. Jørgensen Ed.). Biogene carbon content on a dry matter basis.
- sodium hydroxide, without water, in 50% solution state: -0.00094316 kg; = 0.006205*(1-0.24); lognormal variance with pedigree 0.0458, pedigree (3,4,5,4,2)
  Calculated based on literature value. According to literature (Djekic, 2013, Environmental life-cycle assessment of various dairy products) the amount of sodium hydroxide needed for producing cream from raw milk is approximatelly 24% from the total amount of sodium hydroxide needed when producing butter from raw milk. These 24% have been deducted in this exchange since the raw milk to cream step is not included in the bounderies of this activity.
  properties: dry mass 1 kg, heating value, net 3.03 MJ, wet mass 1 kg
- tap water: -2.0164 kg; name tap_water_input; = 14.2*(1-0.29); lognormal variance with pedigree 0.0458, pedigree (3,4,5,4,2)
  Calculated based on literature value. According to literature (Djekic, 2013, Environmental life-cycle assessment of various dairy products) the amount of water needed for producing cream from raw milk is approximatelly 29% from the total amount of water needed when producing butter from raw milk. These 29% have been deducted in this exchange since the raw milk to cream step is not included in the bounderies of this activity.
  properties: carbon content, fossil 0.00178991, dry mass 0.000337476 kg, water content 2962.17, wet mass 1 kg
  note on carbon content, fossil: Bicarbonate content is 2.93 mol/m3. CO2 content is 0.1 mol/m3 (ecoinvent v2.2 report 8, Tab 93.1).
- wastewater from potato starch production: 8.24851e-6, 0.00170569 m3 (2 suppliers, which the file names only by identifier); sum of these 0.00171394 m3; = (tap_water_input/1000)-water_to_air_unspecified; lognormal variance with pedigree 0.1786, pedigree (4,5,5,5,5)
  Calculated value.
  Wastewater from potato starch production is a proxy for the wastewater from butter production for which data are not available.
  The amount of wastewater is calculated as difference between the amount of tap water entering the process and the amount of water which is consumed in th process (evaporates).
  Cross referenced; according to literature (Djekic, 2013, Environmental life-cycle assessment of various dairy products) the amount of wastewater produced when producing butter is between 6.41 - 9.61 l/kg.
  production volume
    Calculated from production volume of reference product using the relative outputs.
  properties: carbon content, non-fossil 0.993118, dry mass 0.871801 kg, water content 1146.05, wet mass 1000 kg

## Emissions to nature
- Water [air, unspecified]: -0.00030246 m3; name water_to_air_unspecified; = ((tap_water_input/1000)*fraction_TW_to_air); lognormal variance with pedigree 0.0458, pedigree (3,4,5,4,2)
  Calculated value based on literature values and expert opinion. See comments in the parametres' comment field.
  property fraction, origin: fresh water 1; name fraction_origin_fresh_water
  property fraction, origin: salt water 0; name fraction_origin_salt_water
  property fraction, origin: unspecified 0; name fraction_origin_unspecified

## Sampling procedure
Literature

## Extrapolations
This dataset was created based on literature data (Nilsson K., 2010, Comparative life cycle assessment of margarine and butter consumed in the UK, Germany and France) which present data collected at dairies in Denmark and Germany,
