# yogurt production, from cow milk

Dataset: EcoSpold 2, unit process
Geography: RoW
Time period: 2010-01-01 to 2022-12-31
Technology level: current
Classification: ISIC rev.4 ecoinvent: 1050:Manufacture of dairy products
Scenario: Business-as-Usual
System model: Substitution, consequential, long-term
Generated by: François Saunier
Database: ecoinvent
isCopyrightProtected: true

## General comment
This GLO dataset has been copied from an original dataset covering the geography of Quebec. The uncertainty has been adjusted accordingly.
This dataset represents the production of yogurt made from cow milk in Quebec (Canada). The product is an aggregation of various types of yogurt (standard, greek yogurt, yogurt to drink) and various fat content and flavourings (fruits, aroma). An average of data from three producers in the region of Quebec has been made.
The packaging in which the yogurt is sold is not included. Here are some information on an average composition (for 1 kg of yogurt) of the packaginig used by the sites covered by the data collection process :
- low-density polyethylene : 3,577E-03 kg
- paper : 4,541E-03 kg
- aluminium paper : 1,295E-03 kg
- paperboard : 7,281E-02 kg
- polyethylene : 9,522E-03 kg
- polystyrene : 2,166E-02 kg
- expanded polystyrene : 1,997E-02 kg
- polypropylene : 1,520E-02 kg

## Included activities start
From reception of milk and other inputs at the factory gate.

## Included activities end
This activity ends with yogurt at factory gate.
The dataset includes yogurt production, refrigeration (energy and losses) on site, energy for primary and secondary packaging and infrastruture for the plant.
The dataset doesn't include packaging materials.

## Geography
This dataset has been copied from an original dataset covering the geography of Quebec. The uncertainty has been adjusted accordingly.
Data from three producers located on four sites in the region of Québec.

## Technology
Average of present used technology

## Time period
Collected data for Quebec industry for the years 2010-2012

## Parameters
- quebec production volume: 1.89096e8 kg; name PV_Quebec; = 142421000*(309589/233173)
  Production volume of yogurt in the Quebec dataset. See the dataset for more information.

## Reference product
- yogurt, from cow milk: 1 kg; name Ref; By-product classification allocatable product; CPC 22230: Yoghurt and other fermented or acidified milk and cream
  production volume 4.23726e10 kg
    Gross approximation of the production volume based on the Quebec production volume scaled to GLO by the ratio of global and Quebec GDP for 2011 (7e13/3.11e11). It should be replaced as soon as better data is found.
  property carbon content, fossil 0; name Ref_C_content_fossil
    fossil carbon content on a dry matter basis. Proxy value, calculated from the chemical composition of an average yogurt from data published by Health Canada (http://webprod3.hc-sc.gc.ca/cnf-fce/report-rapport.do?lang=eng).
  property carbon content, non-fossil 0.4964; name Ref_C_content_non_fossil
    biogene carbon content on a dry matter basis. Proxy value, calculated from the chemical composition of an average yogurt from data published by Health Canada (http://webprod3.hc-sc.gc.ca/cnf-fce/report-rapport.do?lang=eng).
  property fat content 0.032; name Ref_fat_content
    Fat content, on a wet mass basis. Average value calculated from a fat mass balance on the collected data.
  property price 1.07 EUR2005
    Calculated based on data from FAOSTAT (accessed 20140428). The price is calculated by using data on total world import quantity (tonnes) and import value (1000 USD), year 2005. 1225007 tonnes of Yoghurt, concentrated or not was imported in the world in 2005. The import value was 1580836000 USD. The calculated price is thus (1580836/1225007=1.29*0.8=) 1.041 Euro. Using the same approach the calculated price for 2010 was 1.206 Euro.
  property water content 3.65549; name Ref_water_content; = Ref_WWM/Ref_DM
  property water in wet mass 0.7852 kg; name Ref_WWM
  properties: carbon allocation 0.106627 kg, carbon content 0.4964, dry mass 0.2148 kg, wet mass 1 kg

## Inputs from technosphere
- EDTA, ethylenediaminetetraacetic acid: 0.0001393 kg; lognormal variance with pedigree 0.0126, pedigree (1,4,4,5,1)
  Calculated Value. Ingredient in the composition of cleaning agents. Active agent only, water for dillution is included in the flow "water, deionised, from tap water, at user".
  properties: carbon content, fossil 0.410959, dry mass 1 kg, heating value, net 19.09 MJ, wet mass 1 kg
- ammonia, anhydrous, liquid: 3.65509e-9, 7.43661e-10, 7.09527e-9, 2.73309e-8, 3.32444e-9, 1.57027e-8, 2.20148e-9, 7.86465e-8 kg (8 suppliers, which the file names only by identifier); sum of these 1.387e-7 kg; lognormal variance with pedigree 0.0126, pedigree (1,4,4,5,1)
  Calculated Value. This flow represents input of refrigerant lossed at plant.
  properties: dry mass 1 kg, wet mass 1 kg
- cheese, from cow milk, fresh, unripened: -0.0004024 kg; name cheese; lognormal variance with pedigree 0.0046, pedigree (1,4,1,5,1)
  Calculated Value. The cheese co-product is a mix of fresh cheese (approximately 85% of quark and 15% of cottage).
  production volume
    Calculated from production volume of reference product using the relative outputs.
  property carbon content, fossil 0; name cheese_C_content_fossil
  property carbon content, non-fossil 0.4899; name cheese_C_content_non_fossil
  property fat content 0.014; name cheese_fat_content
  property water content 4.70776; name cheese_water_content; = cheese_WWM/cheese_DM
  property water in wet mass 0.8248 kg; name cheese_WWM
  properties: dry mass 0.1752 kg, price 3.34 EUR2005, wet mass 1 kg
  note on carbon content, fossil: fossil carbon content on a dry matter basis. Proxy value, calculated from the chemical composition of an average fresh cheese from data published by Health Canada (http://webprod3.hc-sc.gc.ca/cnf-fce/report-rapport.do?lang=eng).
  note on carbon content, non-fossil: biogene carbon content on a dry matter basis. Proxy value, calculated from the chemical composition of an average fresh cheese from data published by Health Canada (http://webprod3.hc-sc.gc.ca/cnf-fce/report-rapport.do?lang=eng).
  note on fat content: Fat content, on a wet mass basis. Average value calculated from a fat mass balance on the collected data.
- chemical factory, organics: 2.43902e-10 unit; = 1/(factory_annual_production*factory_lifetime); lognormal variance with pedigree 0.008, pedigree (1,1,4,1,1)
  Calculated value. Based on production volume (82 kt) and lifetime (50 years) of an average factory.
  Uncertainty: No uncertainty added - uncertainty based on propagation of the uncertainty of the underlying variables.
  property chemical factory annual production 8.2e7 kg/year; name factory_annual_production
  property lifetime 50 year; name factory_lifetime
  note on chemical factory annual production: Average annual production of the yogurt production plant under study
  note on lifetime: Hypothetical lifetime. Based on the ecoinvent 2.0 report : Life Cycle Inventories of Chemicals
- chemical, organic: 0.005167 kg; lognormal variance with pedigree 0.0126, pedigree (1,4,4,5,1)
  Calculated Value. Ingredient used in the yogurt production. As no better data were available, this flow is used as an approximation for inuline (23% in mass of the amount), gelatin (41%), food colour (26%) and flavour (10%).
  properties: carbon content, fossil 0.628, dry mass 1 kg, heating value, net 19.03 MJ, wet mass 1 kg
  note on carbon content, fossil: This dataset is an unweighted average of 20 organic substances (listed in Tab 88.1, ecoinvent v2.2 report 8, part II), being part of the top100 chemicals included in this database. The C-content has also been calculated as an unweighted average of the C content of the substances composing this dataset.
- cow milk: 0.9665 kg; lognormal variance with pedigree 0.0126, pedigree (1,4,4,5,1)
  Calculated Value (in kg of Fat and Protein Corrected Milk). This flow represents the input of milk, concentrated milk and milk powder used at plant. Concentrated milk and milk powder are expressed in cow milk equivalent and their production is approximated with the "evaporation of milk" and "spary-drying of milk" flows.
  FPCM is 4.0% fat and 3.3% true protein content. Conversion to FPCM is as follow, according to the International Dairy Federation: FPCM (kg/yr) = Production (kg/yr) x [0.1226 x Fat% + 0.0776 x Protein% + 0.2534]
  properties: carbon content, non-fossil 0.53797, dry mass 0.1231 kg, water content 7.12348, wet mass 1 kg
  note on carbon content, non-fossil: biogene carbon content on a dry matter basis. See cow milk dataset for more information.
- cream, from cow milk: -0.02512 kg; name cream; lognormal variance with pedigree 0.0046, pedigree (1,4,1,5,1)
  Calculated Value. The cream co-product is a mix of cream with several fat contents.
  production volume
    Calculated from production volume of reference product using the relative outputs.
  property carbon content, fossil 0; name cream_C_content_fossil
  property carbon content, non-fossil 0.6847; name cream_C_content_non_fossil
  property fat content 0.241; name cream_fat_content
  property water content 2.33222; name cream_water_content; = cream_WWM/cream_DM
  property water in wet mass 0.6999 kg; name cream_WWM
  properties: dry mass 0.3001 kg, price 1.48 EUR2005, wet mass 1 kg
  note on carbon content, fossil: fossil carbon content on a dry matter basis. Proxy value, calculated from the chemical composition of an average cream from data published by Health Canada (http://webprod3.hc-sc.gc.ca/cnf-fce/report-rapport.do?lang=eng).
  note on carbon content, non-fossil: biogene carbon content on a dry matter basis. Proxy value, calculated from the chemical composition of an average cream from data published by Health Canada (http://webprod3.hc-sc.gc.ca/cnf-fce/report-rapport.do?lang=eng).
- electricity, medium voltage: 0.0169692, 0.000630117, 0.00176199, 0.01733, 0.140007, 0.000634904, 0.0031423, 0.0091579, 0.00806667 kWh (9 suppliers, which the file names only by identifier); sum of these 0.1977 kWh; lognormal variance with pedigree 0.0126, pedigree (1,4,4,5,1)
  Calculated Value. Energy used on site.
- evaporation of milk: 0.08187 kg; lognormal variance with pedigree 0.0126, pedigree (1,4,4,5,1)
  Calculated Value. This flow represents the production of concentrated milk and milk powder used as input. Concentrated milk and milk powder are expressed in cow milk equivalent and their production is approximated with the "evaporation of milk" and "spary-drying of milk" flows.
- heat, district or industrial, natural gas: 0.218538, 0.507942 MJ (2 suppliers, which the file names only by identifier); sum of these 0.72648 MJ; = MJfuel_input/fuel_use; lognormal variance with pedigree 0.008, pedigree (1,1,4,1,1)
  Calculated Value. Energy used on site. The mathematicle relation is based on reported fuel input (in MJ) and efficiency (1/Fuel_use). See variable's comments.
  Uncertainty: No uncertainty added - uncertainty based on propagation of the uncertainty of the underlying parameters
  properties: Corresponding fuel use 1.11111 MJ, heat of fuel used 0.8072 MJ, heating value, net 1 MJ
  note on Corresponding fuel use: Lower heating value of the fuel input related to the heat output. An efficiency of 0.9 is supposed.
- hydrogen peroxide, without water, in 50% solution state: 0.00010325, 2.175e-5 kg (2 suppliers, which the file names only by identifier); sum of these 0.000125 kg; lognormal variance with pedigree 0.0126, pedigree (1,4,4,5,1)
  (same comment as for EDTA, ethylenediaminetetraacetic acid)
  properties: dry mass 1 kg, heating value, net 7.13 MJ, wet mass 1 kg
- maize starch: 0.01843 kg; lognormal variance with pedigree 0.0427, pedigree (1,2,5,5,1)
  Calculated Value. Ingredient used in the yogurt production.
  properties: carbon content, non-fossil 0.46, dry mass 0.86 kg, heating value, net 11.64 MJ, water content 0.162791, wet mass 1 kg
  note on carbon content, non-fossil: C-content of starch is considered 46% on dry mass basis (from "Evolutionary and Biochemical Aspects", A.D. Kay and T. Vrede (in Global Ecology, 2010, Elsevier B.V., S.E. Jørgensen Ed.)).
- municipal solid waste: -1.29784e-6, -9.08174e-7, -0.000211743, -0.00254905 kg (4 suppliers, which the file names only by identifier); sum of these -0.002763 kg; lognormal variance with pedigree 0.0046, pedigree (1,4,1,5,1)
  Calculated Value. Waste from factories with unknown composition have been approximated with municipal solid waste.
  production volume
    Calculated from production volume of reference product using the relative outputs. A direct link to "treatment of municipal solid waste, to sanitary landfill" has been made to reflect Quebec specificity in waste treatment.
  properties: carbon content, fossil 0.171549, carbon content, non-fossil 0.261655, dry mass 0.771 kg, heating value, net 11.74 MJ, water content 0.297017, wet mass 1 kg
  note on carbon content, fossil: MSW composition in tab 4.1, ecoinvent v2.2 report 13_I. C content referred to 1 kg DM
  note on heating value, net: Value taken from the general comment of the treatment dataset.
- nitric acid, without water, in 50% solution state: 7.92991e-6, 4.47901e-6, 2.72738e-5, 6.63048e-6, 6.65512e-6, 5.82686e-5, 1.655e-5, 2.15228e-5, 7.19026e-6 kg (9 suppliers, which the file names only by identifier); sum of these 0.0001565 kg; lognormal variance with pedigree 0.0126, pedigree (1,4,4,5,1)
  (same comment as for EDTA, ethylenediaminetetraacetic acid)
  properties: dry mass 1 kg, wet mass 1 kg
- propylene glycol, liquid: 1.61032e-6, 3.26068e-6 kg (2 suppliers, which the file names only by identifier); sum of these 4.871e-6 kg; lognormal variance with pedigree 0.0126, pedigree (1,4,4,5,1)
  (same comment as for EDTA, ethylenediaminetetraacetic acid)
  properties: carbon content, fossil 0.473684, dry mass 1 kg, heating value, net 27.09 MJ, wet mass 1 kg
- refrigerant R134a: 5.448e-9 kg; lognormal variance with pedigree 0.0126, pedigree (1,4,4,5,1)
  Calculated Value. This flow is used as proxy and represents input of HCFC-22 refrigerant lossed at plant.
  properties: carbon content, fossil 0.235294, dry mass 1 kg, heating value, net 9.51 MJ, wet mass 1 kg
- soda ash, light: 2.359e-6 kg; lognormal variance with pedigree 0.0126, pedigree (1,4,4,5,1)
  (same comment as for EDTA, ethylenediaminetetraacetic acid)
  properties: carbon content, fossil 0.0517241, dry mass 1 kg, heating value, net 3.43 MJ, wet mass 1 kg
- sodium hydroxide, without water, in 50% solution state: 0.002056 kg; lognormal variance with pedigree 0.0126, pedigree (1,4,4,5,1)
  (same comment as for EDTA, ethylenediaminetetraacetic acid)
  properties: dry mass 1 kg, heating value, net 3.03 MJ, wet mass 1 kg
- sodium hypochlorite, without water, in 15% solution state: 6.28488e-8, 2.98351e-7 kg (2 suppliers, which the file names only by identifier); sum of these 3.612e-7 kg; lognormal variance with pedigree 0.0126, pedigree (1,4,4,5,1)
  (same comment as for EDTA, ethylenediaminetetraacetic acid)
  properties: dry mass 1 kg, wet mass 1 kg
- spray-drying of milk: 0.005706 kg; lognormal variance with pedigree 0.0126, pedigree (1,4,4,5,1)
  Calculated Value. This flow represents the production of milk powder used as input. Milk powder is expressed in cow milk equivalent and its production is approximated with the "evaporation of milk" and "spary-drying of milk" flows.
- strawberry: 0.03633 kg; lognormal variance with pedigree 0.0126, pedigree (1,4,4,5,1)
  Calculated Value. Ingredient used in the yogurt production. Approximation for fruits used as ingredients (strawberry is the most popular fruit in yogurt; other popular fruits in Quebec yogurt are bilberry and raspberry).
  properties: carbon content, non-fossil 0.04617, dry mass 0.101 kg, water content 8.90099, wet mass 1 kg
- sugar, from sugar beet: 0.03925 kg; lognormal variance with pedigree 0.0126, pedigree (1,4,4,5,1)
  Calculated Value. Ingredient used in the yogurt production.
  properties: carbon content, non-fossil 0.44, dry mass 1 kg, wet mass 1 kg
- sugar, from sugarcane: 0.02207 kg; lognormal variance with pedigree 0.0126, pedigree (1,4,4,5,1)
  Calculated Value. Ingredient used in the yogurt production.
  properties: carbon content, non-fossil 0.44, dry mass 1 kg, wet mass 1 kg
- tap water: 0.000298466, 0.00150031, 0.000556922, 0.00019579, 0.00181033, 0.00752612, 0.00216206 kg (7 suppliers, which the file names only by identifier); sum of these 0.01405 kg; lognormal variance with pedigree 0.0126, pedigree (1,4,4,5,1)
  Calculated Value. Ingredient used in the yogurt production.
  properties: carbon content, fossil 0.00178991, dry mass 0.000337476 kg, water content 2962.17, wet mass 1 kg
  note on carbon content, fossil: Bicarbonate content is 2.93 mol/m3. CO2 content is 0.1 mol/m3 (ecoinvent v2.2 report 8, Tab 93.1).
- wastewater from potato starch production: -1.94898e-5, -0.00403025 m3 (2 suppliers, which the file names only by identifier); sum of these -0.00404974 m3; lognormal variance with pedigree 0.0046, pedigree (1,4,1,5,1)
  Calculated Value. Wastewater from factories with almost no information on composition (only data is an average COD = 2.5) have been approximated with wastewater from potato starch production (COD = 2)
  production volume
    Calculated from production volume of reference product using the relative outputs.
  properties: carbon content, non-fossil 0.993118, dry mass 0.871801 kg, water content 1146.05, wet mass 1000 kg
- water, deionised: 0.000679143, 7.53083e-7, 0.000209204 kg (3 suppliers, which the file names only by identifier); sum of these 0.0008891 kg; lognormal variance with pedigree 0.0146, pedigree (3,4,4,5,1)
  Calculated Value. Water for dillution of chemicals used as cleaning agents.
  Uncertainty: Water for dillution of chemicals used as cleaning agents. Calculated estimate based on chemical composition of cleaning agents.
  properties: wet mass 1 kg
- wheat grain: 9.05124e-6, 0.00170095 kg (2 suppliers, which the file names only by identifier); sum of these 0.00171 kg; lognormal variance with pedigree 0.0126, pedigree (1,4,4,5,1)
  Calculated Value. Ingredient used in the yogurt production. Approximation for cereals, nuts, cofee or others ingredients used in preparation.
  properties: carbon content, non-fossil 0.464601, dry mass 0.85 kg, water content 0.176471, wet mass 1 kg
- whey: 0.007366 kg; lognormal variance with pedigree 0.0126, pedigree (1,4,4,5,1)
  Calculated Value. Ingredient used in the yogurt production. Approximation for whey (dry) and ferments.
  properties: carbon content, non-fossil 0.340757, dry mass 0.064 kg, water content 14.625, wet mass 1 kg

## Inputs from nature
- Water, unspecified natural origin [natural resource, in water]: 0.004053 m3; lognormal variance with pedigree 0.0126, pedigree (1,4,4,5,1)
  Calculated Value. Process water used on site.

## Emissions to nature
- Ammonia [air, unspecified]: 1.387e-7 kg; lognormal variance with pedigree 0.0126, pedigree (1,4,4,5,1)
  Calculated Value. This flow represents refrigerant losses at plant
- Methane, chlorodifluoro-, HCFC-22 [air, unspecified]: 5.448e-9 kg; lognormal variance with pedigree 0.0126, pedigree (1,4,4,5,1)
  Calculated Value. This flow represents refrigerant losses at plant

## Sampling procedure
Measured values for inputs and outputs based on data survey from three yogurt producers (total of 4 production sites) in Québec.

## Extrapolations
See geography This dataset has been copied from an original dataset covering the geography QC. The uncertainty has been adjusted accordingly.
Concentrated milk et milk powder used as ingredients for yogurt production are approximated with the addition of milk equivalent to the milk input and with the two operations "evaporation of milk" and "spray-drying of milk".
Wastewater from factories with almost no information on composition (only data is an average COD = 2.5 kg/m³) has been approximated with wastewater from potato starch production (COD = 2 kg/m³).
