# methyl acetate to generic market for solvent, organic

Dataset: EcoSpold 2, unit process
Geography: GLO
Time period: 2012-01-01 to 2022-12-31
Technology level: current
Classification: ISIC rev.4 ecoinvent: 20:Manufacture of chemicals and chemical products
Synonyms: methyl acetic ester; methyl ester; methyl ester of monoacetic acid; methyl ethanoate; acetic acid
Scenario: Business-as-Usual
System model: Substitution, consequential, long-term
Generated by: Sofia Parada Tur
Database: ecoinvent
isCopyrightProtected: true

## General comment
This activity links methyl acetate, byproduct in the oxidation of butane to the generic market for organic solvents.

## Included activities start
The activity starts with the reception of methyl acetate

## Included activities end
The activity ends with the production of solvent, organic for the generic market

## Reference product
- methyl acetate: 1 kg; By-product classification allocatable product; CPC 34140: Carboxylic acids and their anhydrides, halides, peroxides and peroxyacids and their halogenated, sulphonated, […]; CAS 79-20-9
  production volume 1 kg
  property heating value, net 24.55 MJ
    LHV is calculated based on the elemental composition of the substance. Based on the CAS number of the substance (000079-20-9), the chemical formula of the substance is found to be: C3H6O2, (PubChem 2020).
    Reference: Kim, S., Chen, J., Cheng, T., Gindulyte, A., He, J., He, S., Li, Q., Shoemaker, B. A., Thiessen, P. A., Yu, B., Zaslavsky, L., Zhang, J., & Bolton, E. E. (2019). PubChem 2019 update: improved access to chemical data. Nucleic acids research, 47(D1), D1102–D1109. https://doi.org/10.1093/nar/gky1033
  properties: carbon allocation 0.486486 kg, carbon content 0.486486, carbon content, fossil 0.486486, carbon content, non-fossil 0, dry mass 1 kg, price 0 EUR2005, water content 0, water in wet mass 0 kg, wet mass 1 kg

## Inputs from technosphere
- solvent, organic: 1 kg
  production volume
    Based on production volume of methyl acetate as byproduct in oxidation of butane. Refer to dataset "oxidation of butane".
  properties: carbon content, fossil 0.63072, dry mass 1 kg, heating value, net 19.11 MJ, price 1.36 EUR2005, wet mass 1 kg

## Extrapolations
the present inventory is a linking activity, from fraction 1 of naphtha separation process, to the generic product "chemical, organic"

## Review by Bo Weidema 2012-04-20
Passed
