# kraft paper production

Dataset: EcoSpold 2, unit process
Geography: RER
Time period: 2018-01-01 to 2022-12-31
Technology level: current
Classification: ISIC rev.4 ecoinvent: 1701:Manufacture of pulp, paper and paperboard
Synonyms: packaging paper; sack paper; MF paper; MG paper; unbleached kraft paper; Papiersack; bleached kraft paper; kraft paper; Verpackungspapier; kraft sack paper
Scenario: Business-as-Usual
System model: Substitution, consequential, long-term
Share of production covered: 80 %
Generated by: Michael Sturges
Database: ecoinvent
isCopyrightProtected: true

## General comment
Kraft paper is produced from chemical pulp produced in the kraft process. Kraft paper can be used for a number of flexible packaging applications such as paper sacks, wrapping papers and paper bags. Within kraft paper, Sack kraft paper is a porous kraft paper with high elasticity and high tear resistance, designed for packaging products with high demands for strength and durability. The data was collected specifically for Sack kraft paper but are representative for all kraft paper production. The dataset represents a mix of white (bleached) and brown (unbleached) paper.
Data in this model is from a study by CEPI Eurokraft in 2020.
The dataset represents average data calculated from several European Sack kraft paper mills and the production year 2018. Although the data was collected specifically for sack kraft paper production, discussions with the technical experts at the mills reveal that the data are applicable for other flexible kraft packaging papers”
The majority of the mills in the study are integrated mills, but some "semi-integrated mills" were included, Semi-integrated mills are either an integrated mill that has been split into two companies (pulp production and paper production) where the pulp producer has not participated in the study. Or a production site where one type of paper is made from virgin pulp and the other type of paper is made from market pulp.
The energy sources at an integrated pulp and paper mills consists of external and internal fuels plus electricity from the grid and internally produced electricity. External fuels can be fossil or biobased. The internal fuels mainly consist of the black liquor and bark from the wood input for pulp production. Black liquor is the by-product of chemical pulping. It contains almost all of the inorganic cooking chemicals along with the lignin and other organic matter separated from the wood during pulping in the digester. The initial concentration of weak black liquor is about 15% dry solids in water. It is concentrated to firing conditions between 65% and 85% dry solids concentration. It is then burned in the "Recovery boiler". There are two purposes of burning the black liquor, one is to recover the inorganic cooking chemicals, the other is to make use of the energy in the organic portion of the black liquor. Source: Adams. T.N (editor) et al, "Kraft recovery boilers", 1997
The following air emissions were reported in the study: CO2 (fossil and biogenic), CH4 (fossil), N2O (fossil+ biogenic), CO (fossil+ biogenic), SO2, H2S, TRS, Total S, NOx, NH3, NMVOC, particles (all sizes), Pb and Hg. The listed air emissions are the most important emissions for the kraft paper production and cover all emissions at the mill, both from the cooking and recovering processes and combustion of fuels at different points at the plant.
For a more complete air emission profile for Sack kraft paper production, however, additional air emissions (beyond the ones listed above) were added for the combustion of the external fuels and internal using LCI datasets for combustion of different fuels as proxy. The air emissions were calculated based on the mix of the external and internal fuels in the study and more information about the fuel mix and the proxy are provided under "Extrapolations". No proxy was available for the combustion of black liquor, biological fibre slush, and tall oil. Emissions from these internal energy generation processes are therefore only reflected in the key emission factors provided by the industry.

## Included activities start
The process starts with the transports of wood and pulp to paper mill.

## Included activities end
The activity includes transports to paper mill, wood handling, chemical pulping, paper production, energy production on-site and internal waste water treatment.
The activity ends with the paper leaving the factory gate.

## Geography
Data were provided by paper mills in Austria, Bulgaria, Czech Republic, Finland, Norway, Poland, Spain and Sweden.

## Technology
Average of present used technology in 2018

## Time period
Statistics from CEPI Eurokraft for Sack production in Europe 2018. Production volume valid for 2018.

## Reference product
- kraft paper: 1 kg; name a_RP; By-product classification allocatable product; CPC 32133: Other uncoated kraft paper and paperboard; sack kraft paper, creped or crinkled
  production volume 1.99014e9 kg
    Statistics from CEPi Eurokraft for Sack production in Europe 2018. The figure represents the total volume of sack kraft paper production by CEPI Eurokraft members. Not all Sack Kraft Paper producers in Europe are members of CEPI Eurokraft
  property price 0.598 EUR2005
    Export prices for the World+ according to: http://faostat.fao.org/site/626/DesktopDefault.aspx?PageID=626#ancor downloaded 28 April 2009; calculated as export value divided by export volume.
  properties: carbon allocation 0.395617 kg, carbon content 0.418642, carbon content, fossil 0.0020219, carbon content, non-fossil 0.41662, dry mass 0.945 kg, heating value, net 14.11 MJ, water content 0.0582011, water in wet mass 0.055 kg, wet mass 1 kg

## Inputs from technosphere
- aluminium sulfate, powder: 0.00782856 kg; lognormal variance with pedigree 0.0009, pedigree (1,2,2,1,1)
  Data provided by industry (CEPI Eurokraft) 2018.
  properties: dry mass 1 kg, wet mass 1 kg
- ash from paper production sludge: -0.0392763, -0.00102666 kg (2 suppliers, which the file names only by identifier); sum of these -0.040303 kg; lognormal variance with pedigree 0.0009, pedigree (1,2,2,1,1)
  Data provided by industry (CEPI Eurokraft) 2018. Represents 0.030 kg/kg “Ashes and slags” and 0.010717 kg/kg "Recovery boiler ESP dust"
  production volume
    Calculated from production volume of reference product using the relative outputs.
  properties: carbon content, non-fossil 0.0092, dry mass 1 kg, wet mass 1 kg
- bark chips, wet, measured as dry mass: -0.00105118, -0.00105118 kg (2 suppliers, which the file names only by identifier); sum of these -0.00210236 kg; lognormal variance with pedigree 0.0009, pedigree (1,2,2,1,1)
  Data provided by industry (CEPI Eurokraft) 2018. Bark sold as energy by-product. Not used in the internal processes. Recalculated from 0.03 GJ/ton paper with heating value 13.6 MJ/kg
  production volume
    Calculated from production volume of reference product using the relative outputs.
  properties: carbon content, non-fossil 0.494, dry mass 1 kg, heating value, net 4.81 MJ, price 0.034 EUR2005, water content 1.4, wet mass 2.4 kg
- carbon dioxide, liquid: 0.00116819 kg; lognormal variance with pedigree 0.0009, pedigree (1,2,2,1,1)
  Data provided by industry (CEPI Eurokraft) 2018.
  properties: carbon content, fossil 0.272727, dry mass 1 kg, heating value, net 8.27 MJ, wet mass 1 kg
- chemical, organic: 0.00103532 kg; lognormal variance with pedigree 0.0009, pedigree (1,2,2,1,1)
  Data provided by industry (CEPI Eurokraft) 2018. Proxy for retention aids & polymers (0,73 kg/ton), wet strenght additives (0,23 kg/ton), and defoamer(0.08 kg/ton)
  properties: carbon content, fossil 0.628, dry mass 1 kg, heating value, net 19.03 MJ, wet mass 1 kg
- chlorine dioxide: 0.000598802 kg; lognormal variance with pedigree 0.0009, pedigree (1,2,2,1,1)
  Data provided by industry (CEPI Eurokraft) 2018.
  properties: dry mass 1 kg, wet mass 1 kg
- diesel, low-sulfur: 0.000480649 kg; lognormal variance with pedigree 0.0015, pedigree (2,2,2,1,1)
  Data provided by industry (CEPI Eurokraft) 2018, indicated in energy content and given as 0.02 MJ/kg. Calculation into mass/volume was done by using the following conversion factor: Heavy fuel oil: MJ/kg 42.8. Based on literature, page 16, Report6, part 4. Source: https://ecoinvent.org/wp-content/uploads/2021/09/LHV_fuels.xlsx
  properties: carbon content, fossil 0.865, dry mass 1 kg, heating value, net 42.8 MJ, wet mass 1 kg
- electricity, high voltage: -0.115355 kWh; name a_elec; lognormal variance with pedigree 0.0009, pedigree (1,2,2,1,1)
  Data provided by industry (CEPI Eurokraft) 2018. Represents sold electricity
  production volume
    Calculated from production volume of reference product using the relative outputs.
  property true value relation 3.6; name a_elec_true_value_relation
  properties: price 0.0977 EUR2005
- electricity, medium voltage: 0.580827 kWh; lognormal variance with pedigree 0.0009, pedigree (1,2,2,1,1)
  Data provided by industry (CEPI Eurokraft) 2018. Represents bought electricity
- green liquor dregs: -0.01281 kg; name a_gld; lognormal variance with pedigree 0.0009, pedigree (1,2,2,1,1)
  Data provided by industry (CEPI Eurokraft) 2018. Reported as 0.0096 kg(dry)/kg of Green liquor sludge. Scaled with the DM of green liquor dregs
  production volume
    Calculated from production volume of reference product using the relative outputs.
  properties: carbon content, non-fossil 0.390667, dry mass 0.75 kg, water content 0.333333, wet mass 1 kg
- hazardous waste, for incineration: -4.87222e-6, -0.000186394 kg (2 suppliers, which the file names only by identifier); sum of these -0.000191266 kg; lognormal variance with pedigree 0.0009, pedigree (1,2,2,1,1)
  Data provided by industry (CEPI Eurokraft) 2018. Given as 0.0029 kg(dry)/kg "Hazardous waste". Split 50/50 between ecoinvent waste flows in : Hazardous waste for incineration and hazardous waste for underground landfill since the faith is unknown. Scaled with DM of hazardous waste, for incineration
  production volume
    Calculated from production volume of reference product using the relative outputs.
  properties: carbon content, fossil 0.554667, dry mass 0.75 kg, heating value, net 17 MJ, water content 0.333333, wet mass 1 kg
- hazardous waste, for underground deposit: -0.00014345 kg; name a_hwud; lognormal variance with pedigree 0.0009, pedigree (1,2,2,1,1)
  Data provided by industry (CEPI Eurokraft) 2018. "Hazardous waste" Split 50/50 between ecoinvent waste flows in : Hazardous waste for incineration and hazardous waste for underground landfill since the faith is unknown.
  production volume
    Calculated from production volume of reference product using the relative outputs.
  properties: carbon content, fossil 0.554667, dry mass 1 kg, wet mass 1 kg
- heat, district or industrial, natural gas: 0.289613 MJ; lognormal variance with pedigree 0.0009, pedigree (1,2,2,1,1)
  Data provided by industry (CEPI Eurokraft) 2018. Represents purchased steam
  properties: heating value, net 1 MJ
- heat, district or industrial, other than natural gas: -0.369855 MJ; name a_heat; lognormal variance with pedigree 0.0009, pedigree (1,2,2,1,1)
  Data provided by industry (CEPI Eurokraft) 2018. Represents sold steam and heat
  production volume
    Calculated from production volume of reference product using the relative outputs.
  property true value relation 0.1842; name a_heat_true_value_relation
  properties: heating value, net 1 MJ, price 0.0106 EUR2005
- heavy fuel oil: 0.010634 kg; lognormal variance with pedigree 0.0015, pedigree (2,2,2,1,1)
  Data provided by industry (CEPI Eurokraft) 2018, indicated in energy content and given as 0.44 MJ/kg. Calculation into mass/volume was done by using the following conversion factor: Heavy fuel oil: MJ/kg 41.2. Based on literature, page 21, Report6, part 4. Source: https://ecoinvent.org/wp-content/uploads/2021/09/LHV_fuels.xlsx
  properties: carbon content, fossil 0.849, dry mass 1 kg, heating value, net 41.2 MJ, wet mass 1 kg
- hydrogen peroxide, without water, in 50% solution state: 0.00216527 kg; lognormal variance with pedigree 0.0009, pedigree (1,2,2,1,1)
  Data provided by industry (CEPI Eurokraft) 2018.
  properties: dry mass 1 kg, heating value, net 7.13 MJ, wet mass 1 kg
- light fuel oil: 0.000704874 kg; lognormal variance with pedigree 0.0015, pedigree (2,2,2,1,1)
  Data provided by industry (CEPI Eurokraft) 2018, indicated in energy content and given as 0.03 MJ/kg. Calculation into mass/volume was done by using the following conversion factor: Heavy fuel oil: MJ/kg 42.6. Based on literature, page 18, Report6, part 4. Source: https://ecoinvent.org/wp-content/uploads/2021/09/LHV_fuels.xlsx
  properties: carbon content, fossil 0.862, dry mass 1 kg, heating value, net 42.6 MJ, wet mass 1 kg
- lignite briquettes: 1.16602 MJ; lognormal variance with pedigree 0.0015, pedigree (2,2,2,1,1)
  Data provided by industry (CEPI Eurokraft) 2018. Represents brown coal lignite
  properties: carbon content, fossil 0.65679, dry mass 0.0415385 kg, heating value, net 19.5 MJ, water content 0.234568, wet mass 0.0512821 kg
  note on heating value, net: Based on literature, page 52, Report 5: Dones, R., Bauer, C., Bolliger, R., Burger, B., faist Emmenegger, M., Frischknecht, R., Heck, T., Jungbluth, N., Röder, A., Tuchschmid, M. (2007) Life Cycle Inventories of Energy Systems: Resulst for current Systems in Switzerland and other UCTE Countries. ecoinvent report No. 5. Paul Scherrer Institut Villigen, Swiss Centre for Life Cycle Inventories, Dübendorf, CH
- limestone residue: -0.0362242 kg; name a_lr; lognormal variance with pedigree 0.0009, pedigree (1,2,2,1,1)
  Data provided by industry (CEPI Eurokraft) 2018. Reported as "Lime mud, grits"
  production volume
    Calculated from production volume of reference product using the relative outputs.
  properties: dry mass 0.995 kg, water content 0.00502513, wet mass 1 kg
- magnesium sulfate: 0.000174662 kg; lognormal variance with pedigree 0.0009, pedigree (1,2,2,1,1)
  Data provided by industry (CEPI Eurokraft) 2018.
  properties: dry mass 1 kg, wet mass 1 kg
- maize starch: 0.00152549 kg; lognormal variance with pedigree 0.0009, pedigree (1,2,2,1,1)
  Data provided by industry (CEPI Eurokraft) 2018.
  properties: carbon content, non-fossil 0.46, dry mass 0.86 kg, heating value, net 11.64 MJ, water content 0.162791, wet mass 1 kg
- natural gas, high pressure: 0.000167069, 0.0233169 m3 (2 suppliers, which the file names only by identifier); sum of these 0.023484 m3; lognormal variance with pedigree 0.0015, pedigree (2,2,2,1,1)
  Data provided by industry (CEPI Eurokraft) 2018, indicated in energy content and given as 0.92 MJ/kg. Calculation into mass/volume was done by using the following conversion factor: Heavy fuel oil: MJ/m3 39. Literature value, Source: United Nations Statistics Division (2018) International Recommendations for Energy Statistics (IRES). Available at: http://unstats.un.org/unsd/statcom/doc11/BG-IRES.pdf.
  properties: carbon content, fossil 0.75, dry mass 0.84 kg, heating value, net 36 MJ, wet mass 0.84 kg
  note on heating value, net: Literature value, Source: Christoph Meili;Niels Jungbluth;Maresa Bussa (2021) Life cycle inventories of crude oil and natural gas extraction. ESU-services Ltd. commissioned by BAFU & VSG, Schaffhausen, Switzerland, http://esu-services.ch/data/public-lci-reports/
- oxygen, liquid: 0.00707365 kg; lognormal variance with pedigree 0.0009, pedigree (1,2,2,1,1)
  Data provided by industry (CEPI Eurokraft) 2018.
  properties: dry mass 1 kg, wet mass 1 kg
- paper mill, integrated: 5.44e-11 unit; lognormal variance with pedigree 0.51, pedigree (5,5,5,5,5)
  Amount of infrastructure taken from dataset “kraft paper production, unbleached, RER, 2000”. The underlying data and assumptions are documented in the following report: Hischier R., 2007, Life Cycle Inventories of Packaging and Graphical Paper, Final report ecoinvent data v2.0, 11, Dübendorf, CH
- potato starch: 0.0104025 kg; lognormal variance with pedigree 0.0009, pedigree (1,2,2,1,1)
  Data provided by industry (CEPI Eurokraft) 2018.
  properties: carbon content, non-fossil 0.46, dry mass 0.8 kg, heating value, net 10.66 MJ, water content 0.25, wet mass 1 kg
- pulpwood, softwood, measured as solid wood under bark: 0.000451811 m3; = 0.285629202500731*0.00158180798675782; lognormal variance with pedigree 0.0009, pedigree (1,2,2,1,1)
  This value represents a calculated value, i.e., it is not based on CEPI Eurokraft, 2018 data. There was found to be an imbalance in carbon and therefore this value had to be recalculated to close the balance. The original amount of pulpwood was reported by CEPI (2018) as pine: 0.562 kg dry/ kg kraft paper and spruce: 0.551 kg dry/ kg dry/ kg kraft paper. The amount of wood from DE and SE are based on the market shares of the market for pulpwood, softwood, measured as solid wood under bark, Europe without Switzerland
  properties: basic wood density 387.2, carbon content, non-fossil 0.494, dry mass 490 kg, heating value, net 4483.78 MJ, water content 0.8, wet mass 882 kg
- pulpwood, softwood, measured as solid wood under bark: 0.00113 m3; = 0.714370797499269*0.00158180798675782; lognormal variance with pedigree 0.0009, pedigree (1,2,2,1,1)
  (same comment as for pulpwood, softwood, measured as solid wood under bark)
- pulpwood, softwood, measured as solid wood under bark: 0.00126224 m3; = 0.714370797499269*0.00176692427571574; lognormal variance with pedigree 0.0009, pedigree (1,2,2,1,1)
  (same comment as for pulpwood, softwood, measured as solid wood under bark)
  properties: basic wood density 387.2, carbon content, non-fossil 0.494, dry mass 430 kg, heating value, net 4483.78 MJ, water content 0.8, wet mass 774 kg
- pulpwood, softwood, measured as solid wood under bark: 0.000504685 m3; = 0.285629202500731*0.00176692427571574; lognormal variance with pedigree 0.0009, pedigree (1,2,2,1,1)
  (same comment as for pulpwood, softwood, measured as solid wood under bark)
- quicklime, milled, loose: 0.0300732 kg; lognormal variance with pedigree 0.0009, pedigree (1,2,2,1,1)
  Data provided by industry (CEPI Eurokraft) 2018.
  properties: dry mass 0.99 kg, water content 0.010101, wet mass 1 kg
- rosin size, for paper production: 0.000327474 kg; lognormal variance with pedigree 0.0009, pedigree (1,2,2,1,1)
  Data provided by industry (CEPI Eurokraft) 2018.
  properties: carbon content, non-fossil 0.515474, dry mass 1 kg, heating value, net 15.62 MJ, wet mass 1 kg
- sludge from pulp and paper production: -0.0245276, -0.000271798 kg (2 suppliers, which the file names only by identifier); sum of these -0.0247994 kg; lognormal variance with pedigree 0.0009, pedigree (1,2,2,1,1)
  Data provided by industry (CEPI Eurokraft) 2018. Reported as 0.0186 kg(dry)/kg of fiber-, chem-, biosludge. Scaled with the DM of sludge from pulp and paper production
  production volume
    Calculated from production volume of reference product using the relative outputs.
  properties: carbon content, non-fossil 0.21, dry mass 0.75 kg, heating value, net 2.65 MJ, water content 0.333333, wet mass 1 kg
- soda ash, light: 0.00198837 kg; lognormal variance with pedigree 0.0009, pedigree (1,2,2,1,1)
  Data provided by industry (CEPI Eurokraft) 2018.
  properties: carbon content, fossil 0.0517241, dry mass 1 kg, heating value, net 3.43 MJ, wet mass 1 kg
- sodium chlorate, powder: 0.00579593 kg; lognormal variance with pedigree 0.0009, pedigree (1,2,2,1,1)
  Data provided by industry (CEPI Eurokraft) 2018.
  properties: dry mass 1 kg, wet mass 1 kg
- sodium chloride, powder: 0.00189415 kg; lognormal variance with pedigree 0.0009, pedigree (1,2,2,1,1)
  Data provided by industry (CEPI Eurokraft) 2018.
  properties: dry mass 1 kg, wet mass 1 kg
- sodium hydroxide, without water, in 50% solution state: 0.0121591 kg; lognormal variance with pedigree 0.0009, pedigree (1,2,2,1,1)
  Data provided by industry (CEPI Eurokraft) 2018.
  properties: dry mass 1 kg, heating value, net 3.03 MJ, wet mass 1 kg
- sodium sulfate, anhydrite: 0.00395395 kg; lognormal variance with pedigree 0.0009, pedigree (1,2,2,1,1)
  Data provided by industry (CEPI Eurokraft) 2018.
  properties: dry mass 1 kg, wet mass 1 kg
- sulfate pulp, bleached: 0.0455345 kg; lognormal variance with pedigree 0.0009, pedigree (1,2,2,1,1)
  Data provided by industry (CEPI Eurokraft) 2018. Given as 0.0536 kg/kg. A split of 15 % HW pulp and 85 % SW pulp was assumed
  properties: carbon content, non-fossil 0.494, dry mass 0.9 kg, heating value, net 13.23 MJ, water content 0.111111, wet mass 1 kg
  note on carbon content, non-fossil: C content of dry mass of sulfate pulp is 0.494 kgC/kg dry wood (ecoinvent v2.2 report 6_IX & ecoinvent v2.2 report 9). No other C containing products in the formulation of the pulp.
- sulfate pulp, bleached: 0.00803551 kg; lognormal variance with pedigree 0.0009, pedigree (1,2,2,1,1)
  Data provided by industry (CEPI Eurokraft) 2018. Given as 0.0536 kg/kg. A split of 15 % HW pulp and 85 % SW pulp was assumed Data provided by industry (CEPI Eurokraft) 2018. Given as 0.0536 kg/kg. A split of 15 % HW pulp and 85 % SW pulp was assumed
- sulfate pulp, unbleached: 4.96498e-5 kg; lognormal variance with pedigree 0.0009, pedigree (1,2,2,1,1)
  Data provided by industry (CEPI Eurokraft) 2018.
  properties: carbon content, non-fossil 0.494, dry mass 0.9 kg, heating value, net 13.23 MJ, price 0.355 EUR2005, water content 0.111111, wet mass 1 kg
- sulfuric acid: 0.00920584 kg; lognormal variance with pedigree 0.0009, pedigree (1,2,2,1,1)
  Data provided by industry (CEPI Eurokraft) 2018.
  properties: dry mass 1 kg, wet mass 1 kg
- tall oil, crude: -0.0249983 kg; name a_tall; lognormal variance with pedigree 0.0009, pedigree (1,2,2,1,1)
  Data provided by industry (CEPI Eurokraft) 2018. Recalculated from 0.60 GJ/ton paper with heating value 23.82 MJ/kg
  production volume
    Calculated from production volume of reference product using the relative outputs.
  properties: carbon content, non-fossil 0.786, dry mass 1 kg, heating value, net 23.82 MJ, price 0.652995 EUR2005, wet mass 1 kg
- tap water: 0.0910608 kg; lognormal variance with pedigree 0.0403, pedigree (1,2,2,1,1)
  Data provided by industry (CEPI Eurokraft) 2018. Reported as network water
  properties: carbon content, fossil 0.00178991, dry mass 0.000337476 kg, water content 2962.17, wet mass 1 kg
- transport, freight train: 0.346454 metric ton*km; lognormal variance with pedigree 0.1203, pedigree (1,2,2,1,1)
  Data provided by industry (CEPI Eurokraft) 2018. Represents the transport of wood and pulp
- transport, freight, lorry >32 metric ton, EURO5: 0.287927 metric ton*km; lognormal variance with pedigree 0.1203, pedigree (1,2,2,1,1)
  Data provided by industry (CEPI Eurokraft) 2018. Represents the transport of wood and pulp
- transport, freight, sea, bulk carrier for dry goods: 0.335594 metric ton*km; lognormal variance with pedigree 0.1203, pedigree (1,2,2,1,1)
  Data provided by industry (CEPI Eurokraft) 2018. Represents the transport of wood and pulp
- turpentine: -0.0136946 kg; name a_turpentine; lognormal variance with pedigree 0.0009, pedigree (1,2,2,1,1)
  Data provided by industry (CEPI Eurokraft) 2018. Recalculated from 0.37 GJ/ton paper with heating value 26.74 MJ/kg
  production volume
    Calculated from production volume of reference product using the relative outputs.
  properties: carbon content, non-fossil 0.882353, dry mass 1 kg, heating value, net 26.74 MJ, price 1.826 EUR2005, wet mass 1 kg
- waste wood, untreated: -0.0302444 kg; name a_wwu; lognormal variance with pedigree 0.0009, pedigree (1,2,2,1,1)
  Data provided by industry (CEPI Eurokraft) 2018. Reported as "wood yard waste". Amount given as 0.024 kg(dry)/kg. Scaled with the DM of waste wood.
  production volume
    Calculated from production volume of reference product using the relative outputs.
  properties: carbon content, non-fossil 0.48632, dry mass 0.8 kg, heating value, net 13.99 MJ, water content 0.25, wet mass 1 kg
- wood chips, wet, measured as dry mass: 0.638159, 0.0242794 kg (2 suppliers, which the file names only by identifier); sum of these 0.662439 kg
  Data provided by industry (CEPI Eurokraft) 2018. Represents 1.18 m3/t of saw mill chips. Converted with a density of 0.46 t(dry)/m3 (dry mass per m3 was scaled by 20% to account for the input of bark, which serves as internal fuel to this process)
  properties: carbon content, non-fossil 0.494, dry mass 1 kg, heating value, net 10.84 MJ, water content 0.7, wet mass 1.7 kg

## Inputs from nature
- Oxygen [natural resource, in air]: 1.93636 kg; name O2; = (CO2_fossil+CO2_non_fossil)/(16*2+12) * (16*2) + (CO_fossil+CO_non_fossil)/(16+12) *16; lognormal variance with pedigree 0.0494, pedigree (2,5,2,1,4)
  Oxygen is required for the combustion process. Calculated value
- Water, unspecified natural origin [natural resource, in water]: 0.0624633 m3; lognormal variance with pedigree 0.0403, pedigree (1,2,2,1,1)
  Data provided by industry (CEPI Eurokraft) 2018. Reported as surface water
- Water, well, in ground [natural resource, in water]: 0.00712069 m3; lognormal variance with pedigree 0.0403, pedigree (1,2,2,1,1)
  Data provided by industry (CEPI Eurokraft) 2018. Reported as ground water.

## Emissions to nature
- Acetaldehyde [air, urban air close to ground]: 2.93246e-7 kg; lognormal variance with pedigree 0.0888, pedigree (2,5,2,1,4)
  Estimation based on fuel input data and emission factors from corresponding ecoinvent fuel combustion datasets (see "Extrapolations" comment). The internal fuels mainly consist of the black liquor and bark from the wood input for pulp production. Internal fuels are represented by the calculated emissions but do not have the corresponding fuel input from technosphere, because they are supplied from within the system boundaries. The amounts of internal fuels used in the process are: Black liquor (16.87 GJ/t), Bark (1.73 GJ/t), Wood fuels (e.g., fuel chip) (0.07 GJ/t), Tall oil (0.2 GJ/t), Methanol (0.04 GJ/t), Strong gases (0.06 GJ/t), Biological fibre slush (0.03 GJ/t). No proxy was available for the combustion of black liquor, biological fibre slush, and tall oil. Emissions from these internal energy generation processes are therefore only reflected in the key emission factors provided by the industry.
- Acetic acid [air, urban air close to ground]: 4.12721e-7 kg; lognormal variance with pedigree 0.0888, pedigree (2,5,2,1,4)
  (same comment as for Acetaldehyde)
- Acetone [air, urban air close to ground]: 6.47625e-8 kg; lognormal variance with pedigree 0.0888, pedigree (2,5,2,1,4)
  (same comment as for Acetaldehyde)
- Aluminium III [air, urban air close to ground]: 1.38757e-5 kg; lognormal variance with pedigree 0.0888, pedigree (2,5,2,1,4)
  (same comment as for Acetaldehyde)
- Ammonia [air, urban air close to ground]: 0.000184864 kg; lognormal variance with pedigree 0.0403, pedigree (1,2,2,1,1)
  Data provided by industry (CEPI Eurokraft) 2018.
- Antimony ion [air, urban air close to ground]: 2.95004e-8 kg; lognormal variance with pedigree 0.6988, pedigree (2,5,2,1,4)
  (same comment as for Acetaldehyde)
- Arsenic ion [air, urban air close to ground]: 6.82258e-8 kg; lognormal variance with pedigree 0.0888, pedigree (2,5,2,1,4)
  (same comment as for Acetaldehyde)
- Barium II [air, urban air close to ground]: 2.95004e-7 kg; lognormal variance with pedigree 0.6988, pedigree (2,5,2,1,4)
  (same comment as for Acetaldehyde)
- Benzene [air, urban air close to ground]: 9.6339e-6 kg; lognormal variance with pedigree 0.0888, pedigree (2,5,2,1,4)
  (same comment as for Acetaldehyde)
- Benzene, ethyl- [air, urban air close to ground]: 1.11865e-7 kg; lognormal variance with pedigree 0.0888, pedigree (2,5,2,1,4)
  (same comment as for Acetaldehyde)
- Benzene, hexachloro- [air, urban air close to ground]: 2.68476e-14 kg; lognormal variance with pedigree 0.0888, pedigree (2,5,2,1,4)
  (same comment as for Acetaldehyde)
- Benzo(a)pyrene [air, urban air close to ground]: 2.52086e-8 kg; lognormal variance with pedigree 0.0888, pedigree (2,5,2,1,4)
  (same comment as for Acetaldehyde)
- Beryllium II [air, urban air close to ground]: 2.95004e-9 kg; lognormal variance with pedigree 0.6988, pedigree (2,5,2,1,4)
  (same comment as for Acetaldehyde)
- Boron [air, urban air close to ground]: 1.32927e-5 kg; lognormal variance with pedigree 0.6988, pedigree (2,5,2,1,4)
  (same comment as for Acetaldehyde)
- Bromine [air, urban air close to ground]: 2.41454e-7 kg; lognormal variance with pedigree 0.6988, pedigree (2,5,2,1,4)
  (same comment as for Acetaldehyde)
- Butane [air, urban air close to ground]: 7.33033e-7 kg; lognormal variance with pedigree 0.0888, pedigree (2,5,2,1,4)
  (same comment as for Acetaldehyde)
- Cadmium II [air, urban air close to ground]: 1.16002e-8 kg; lognormal variance with pedigree 0.6988, pedigree (2,5,2,1,4)
  (same comment as for Acetaldehyde)
- Calcium [air, urban air close to ground]: 8.07454e-5 kg; lognormal variance with pedigree 0.0888, pedigree (2,5,2,1,4)
  (same comment as for Acetaldehyde)
- Carbon dioxide, fossil [air, urban air close to ground]: 0.206809 kg; name CO2_fossil; lognormal variance with pedigree 0.0009, pedigree (1,2,2,1,1)
  Data provided by industry (CEPI Eurokraft) 2018.
- Carbon dioxide, non-fossil [air, urban air close to ground]: 2.4536 kg; name CO2_non_fossil; lognormal variance with pedigree 0.0009, pedigree (1,2,2,1,1)
  Data provided by industry (CEPI Eurokraft) 2018.
- Carbon monoxide, fossil [air, urban air close to ground]: 0.000766014 kg; name CO_fossil; lognormal variance with pedigree 0.6503, pedigree (1,2,2,1,1)
  Data provided by industry (CEPI Eurokraft) 2018.
- Carbon monoxide, non-fossil [air, urban air close to ground]: 0.0018909 kg; name CO_non_fossil; lognormal variance with pedigree 0.6503, pedigree (1,2,2,1,1)
  Data provided by industry (CEPI Eurokraft) 2018.
- Chlorine [air, urban air close to ground]: 6.7119e-7 kg; lognormal variance with pedigree 0.0888, pedigree (2,5,2,1,4)
  (same comment as for Acetaldehyde)
- Chromium III [air, urban air close to ground]: 9.86416e-8 kg; lognormal variance with pedigree 0.6988, pedigree (2,5,2,1,4)
  (same comment as for Acetaldehyde)
- Chromium VI [air, urban air close to ground]: 9.96286e-10 kg; lognormal variance with pedigree 0.6988, pedigree (2,5,2,1,4)
  (same comment as for Acetaldehyde)
- Cobalt II [air, urban air close to ground]: 5.844e-8 kg; lognormal variance with pedigree 0.6988, pedigree (2,5,2,1,4)
  (same comment as for Acetaldehyde)
- Copper ion [air, urban air close to ground]: 1.55178e-7 kg; lognormal variance with pedigree 0.6988, pedigree (2,5,2,1,4)
  (same comment as for Acetaldehyde)
- Dinitrogen monoxide [air, urban air close to ground]: 3.41316e-5 kg; lognormal variance with pedigree 0.0403, pedigree (1,2,2,1,1)
  Data provided by industry (CEPI Eurokraft) 2018. Reported as 0.032 kg/t biogenic N2O and 0.0021 kg/t fossil N2O
- Dioxins, measured as 2,3,7,8-tetrachlorodibenzo-p-dioxin [air, urban air close to ground]: 1.18174e-13 kg; lognormal variance with pedigree 0.0888, pedigree (2,5,2,1,4)
  (same comment as for Acetaldehyde)
- Ethane [air, urban air close to ground]: 1.74904e-5 kg; lognormal variance with pedigree 0.0888, pedigree (2,5,2,1,4)
  (same comment as for Acetaldehyde)
- Ethanol [air, urban air close to ground]: 1.29525e-7 kg; lognormal variance with pedigree 0.0888, pedigree (2,5,2,1,4)
  (same comment as for Acetaldehyde)
- Ethylene [air, urban air close to ground]: 3.49807e-5 kg; lognormal variance with pedigree 0.0888, pedigree (2,5,2,1,4)
  (same comment as for Acetaldehyde)
- Ethyne [air, urban air close to ground]: 5.83012e-6 kg; lognormal variance with pedigree 0.0888, pedigree (2,5,2,1,4)
  (same comment as for Acetaldehyde)
- Fluorine [air, urban air close to ground]: 1.86442e-7 kg; lognormal variance with pedigree 0.0888, pedigree (2,5,2,1,4)
  (same comment as for Acetaldehyde)
- Formaldehyde [air, urban air close to ground]: 9.43517e-7 kg; lognormal variance with pedigree 0.0888, pedigree (2,5,2,1,4)
  (same comment as for Acetaldehyde)
- Hydrocarbons, aliphatic, alkanes, unspecified [air, urban air close to ground]: 9.50664e-6 kg; lognormal variance with pedigree 0.0888, pedigree (2,5,2,1,4)
  (same comment as for Acetaldehyde)
- Hydrocarbons, aliphatic, unsaturated [air, urban air close to ground]: 1.74025e-5 kg; lognormal variance with pedigree 0.0888, pedigree (2,5,2,1,4)
  (same comment as for Acetaldehyde)
- Hydrocarbons, aromatic [air, urban air close to ground]: 6.62769e-8 kg; lognormal variance with pedigree 0.3488, pedigree (2,5,2,1,4)
  (same comment as for Acetaldehyde)
- Hydrochloric acid [air, urban air close to ground]: 4.486e-6 kg; lognormal variance with pedigree 0.0888, pedigree (2,5,2,1,4)
  (same comment as for Acetaldehyde)
- Hydrogen fluoride [air, urban air close to ground]: 1.65765e-7 kg; lognormal variance with pedigree 0.0888, pedigree (2,5,2,1,4)
  (same comment as for Acetaldehyde)
- Hydrogen sulfide [air, urban air close to ground]: 1.94204e-5 kg; lognormal variance with pedigree 0.0403, pedigree (1,2,2,1,1)
  Data provided by industry (CEPI Eurokraft) 2018.
- Iodine [air, urban air close to ground]: 5.30541e-8 kg; lognormal variance with pedigree 0.0888, pedigree (2,5,2,1,4)
  (same comment as for Acetaldehyde)
- Iron ion [air, urban air close to ground]: 1.6212e-5 kg; lognormal variance with pedigree 0.6988, pedigree (2,5,2,1,4)
  (same comment as for Acetaldehyde)
- Lead II [air, urban air close to ground]: 4.33134e-8 kg; lognormal variance with pedigree 0.6503, pedigree (1,2,2,1,1)
  Data provided by industry (CEPI Eurokraft) 2018.
- Lead-210 [air, urban air close to ground]: 7.22935e-5 kBq; lognormal variance with pedigree 0.3488, pedigree (2,5,2,1,4)
  (same comment as for Acetaldehyde)
- Magnesium [air, urban air close to ground]: 1.01808e-5 kg; lognormal variance with pedigree 0.6988, pedigree (2,5,2,1,4)
  (same comment as for Acetaldehyde)
- Manganese II [air, urban air close to ground]: 6.63402e-7 kg; lognormal variance with pedigree 0.6988, pedigree (2,5,2,1,4)
  (same comment as for Acetaldehyde)
- Mercury II [air, urban air close to ground]: 6.01037e-9 kg; lognormal variance with pedigree 0.6503, pedigree (1,2,2,1,1)
  Data provided by industry (CEPI Eurokraft) 2018.
- Methane, fossil [air, urban air close to ground]: 1.40423e-5 kg; lognormal variance with pedigree 0.0403, pedigree (1,2,2,1,1)
  Data provided by industry (CEPI Eurokraft) 2018.
- Methane, non-fossil [air, urban air close to ground]: 4.72029e-5 kg; lognormal variance with pedigree 0.0403, pedigree (1,2,2,1,1)
  Data provided by industry (CEPI Eurokraft) 2018.
- Methanol [air, urban air close to ground]: 2.20192e-7 kg; lognormal variance with pedigree 0.0888, pedigree (2,5,2,1,4)
  (same comment as for Acetaldehyde)
- Molybdenum VI [air, urban air close to ground]: 5.49922e-8 kg; lognormal variance with pedigree 0.6988, pedigree (2,5,2,1,4)
  (same comment as for Acetaldehyde)
- NMVOC, non-methane volatile organic compounds [air, urban air close to ground]: 0.00081764 kg; lognormal variance with pedigree 0.0403, pedigree (1,2,2,1,1)
  Data provided by industry (CEPI Eurokraft) 2018.
- Nickel II [air, urban air close to ground]: 3.00277e-7 kg; lognormal variance with pedigree 0.6988, pedigree (2,5,2,1,4)
  (same comment as for Acetaldehyde)
- Nitrogen oxides [air, urban air close to ground]: 0.00155928 kg; lognormal variance with pedigree 0.0403, pedigree (1,2,2,1,1)
  Data provided by industry (CEPI Eurokraft) 2018.
- PAH, polycyclic aromatic hydrocarbons [air, urban air close to ground]: 5.19026e-8 kg; lognormal variance with pedigree 0.3488, pedigree (2,5,2,1,4)
  (same comment as for Acetaldehyde)
- Particulate Matter, < 2.5 um [air, urban air close to ground]: 9.55928e-6 kg; lognormal variance with pedigree 0.3003, pedigree (1,2,2,1,1)
  Data provided by industry (CEPI Eurokraft) 2018.
- Particulate Matter, > 10 um [air, urban air close to ground]: 8.87625e-5 kg; lognormal variance with pedigree 0.0403, pedigree (1,2,2,1,1)
  Data provided by industry (CEPI Eurokraft) 2018.
- Particulate Matter, > 2.5 um and < 10um [air, urban air close to ground]: 0.000109055 kg; lognormal variance with pedigree 0.1203, pedigree (1,2,2,1,1)
  Data provided by industry (CEPI Eurokraft) 2018.
- Pentane [air, urban air close to ground]: 1.23997e-6 kg; lognormal variance with pedigree 0.0888, pedigree (2,5,2,1,4)
  (same comment as for Acetaldehyde)
- Phenol [air, urban air close to ground]: 5.83012e-7 kg; lognormal variance with pedigree 0.25, pedigree (5,5,5,5,5)
  (same comment as for Acetaldehyde)
- Phenol, pentachloro- [air, urban air close to ground]: 3.02035e-11 kg; lognormal variance with pedigree 0.0888, pedigree (2,5,2,1,4)
  (same comment as for Acetaldehyde)
- Phosphorus [air, urban air close to ground]: 1.23642e-6 kg; lognormal variance with pedigree 0.0888, pedigree (2,5,2,1,4)
  (same comment as for Acetaldehyde)
- Polonium-210 [air, urban air close to ground]: 0.000132927 kBq; lognormal variance with pedigree 0.3488, pedigree (2,5,2,1,4)
  (same comment as for Acetaldehyde)
- Potassium I [air, urban air close to ground]: 8.9027e-5 kg; lognormal variance with pedigree 0.6988, pedigree (2,5,2,1,4)
  (same comment as for Acetaldehyde)
- Potassium-40 [air, urban air close to ground]: 1.94726e-5 kBq; lognormal variance with pedigree 0.3488, pedigree (2,5,2,1,4)
  (same comment as for Acetaldehyde)
- Propane [air, urban air close to ground]: 1.18791e-5 kg; lognormal variance with pedigree 0.0888, pedigree (2,5,2,1,4)
  (same comment as for Acetaldehyde)
- Propene [air, urban air close to ground]: 5.83012e-6 kg; lognormal variance with pedigree 0.0888, pedigree (2,5,2,1,4)
  (same comment as for Acetaldehyde)
- Propionic acid [air, urban air close to ground]: 2.04895e-8 kg; lognormal variance with pedigree 0.0888, pedigree (2,5,2,1,4)
  (same comment as for Acetaldehyde)
- Radium-226 [air, urban air close to ground]: 1.86564e-5 kBq; lognormal variance with pedigree 0.3488, pedigree (2,5,2,1,4)
  (same comment as for Acetaldehyde)
- Radium-228 [air, urban air close to ground]: 1.00278e-5 kBq; lognormal variance with pedigree 0.3488, pedigree (2,5,2,1,4)
  (same comment as for Acetaldehyde)
- Radon-220 [air, urban air close to ground]: 4.66409e-6 kBq; lognormal variance with pedigree 0.3488, pedigree (2,5,2,1,4)
  (same comment as for Acetaldehyde)
- Radon-222 [air, urban air close to ground]: 4.66409e-6 kBq; lognormal variance with pedigree 0.3488, pedigree (2,5,2,1,4)
  (same comment as for Acetaldehyde)
- Scandium [air, urban air close to ground]: 7.36927e-10 kg; lognormal variance with pedigree 0.6988, pedigree (2,5,2,1,4)
  (same comment as for Acetaldehyde)
- Selenium IV [air, urban air close to ground]: 9.35656e-8 kg; lognormal variance with pedigree 0.6988, pedigree (2,5,2,1,4)
  (same comment as for Acetaldehyde)
- Silicon [air, urban air close to ground]: 0.000141089 kg; lognormal variance with pedigree 0.6988, pedigree (2,5,2,1,4)
  (same comment as for Acetaldehyde)
- Sodium [air, urban air close to ground]: 7.81817e-6 kg; lognormal variance with pedigree 0.6988, pedigree (2,5,2,1,4)
  (same comment as for Acetaldehyde)
- Strontium [air, urban air close to ground]: 3.08996e-7 kg; lognormal variance with pedigree 0.6988, pedigree (2,5,2,1,4)
  (same comment as for Acetaldehyde)
- Sulfur dioxide [air, urban air close to ground]: 0.000417964 kg; lognormal variance with pedigree 0.0009, pedigree (1,2,2,1,1)
  Data provided by industry (CEPI Eurokraft) 2018.
- Thallium I [air, urban air close to ground]: 1.46919e-10 kg; lognormal variance with pedigree 0.6988, pedigree (2,5,2,1,4)
  (same comment as for Acetaldehyde)
- Thorium [air, urban air close to ground]: 3.53305e-9 kg; lognormal variance with pedigree 0.6988, pedigree (2,5,2,1,4)
  (same comment as for Acetaldehyde)
- Thorium-228 [air, urban air close to ground]: 8.62858e-6 kBq; lognormal variance with pedigree 0.3488, pedigree (2,5,2,1,4)
  (same comment as for Acetaldehyde)
- Thorium-232 [air, urban air close to ground]: 5.36371e-6 kBq; lognormal variance with pedigree 0.3488, pedigree (2,5,2,1,4)
  (same comment as for Acetaldehyde)
- Tin ion [air, urban air close to ground]: 2.35537e-9 kg; lognormal variance with pedigree 0.6988, pedigree (2,5,2,1,4)
  (same comment as for Acetaldehyde)
- Titanium ion [air, urban air close to ground]: 2.95004e-7 kg; lognormal variance with pedigree 0.6988, pedigree (2,5,2,1,4)
  (same comment as for Acetaldehyde)
- Toluene [air, urban air close to ground]: 2.50404e-6 kg; lognormal variance with pedigree 0.0888, pedigree (2,5,2,1,4)
  (same comment as for Acetaldehyde)
- Uranium [air, urban air close to ground]: 5.88842e-9 kg; lognormal variance with pedigree 0.6988, pedigree (2,5,2,1,4)
  (same comment as for Acetaldehyde)
- Uranium-238 [air, urban air close to ground]: 1.56247e-5 kBq; lognormal variance with pedigree 0.3488, pedigree (2,5,2,1,4)
  (same comment as for Acetaldehyde)
- Vanadium V [air, urban air close to ground]: 5.86831e-7 kg; lognormal variance with pedigree 0.6988, pedigree (2,5,2,1,4)
  (same comment as for Acetaldehyde)
- Water [air, non-urban air or from high stacks]: 0.0054284 m3; lognormal variance with pedigree 0.0428, pedigree (3,3,2,1,1)
  Represents the difference between reported water input and water output is assumed plus the estimated
- Xylene [air, urban air close to ground]: 3.84788e-6 kg; lognormal variance with pedigree 0.0888, pedigree (2,5,2,1,4)
  (same comment as for Acetaldehyde)
- Zinc II [air, urban air close to ground]: 1.18951e-6 kg; lognormal variance with pedigree 0.6988, pedigree (2,5,2,1,4)
  (same comment as for Acetaldehyde)
- m-Xylene [air, urban air close to ground]: 4.4746e-7 kg; lognormal variance with pedigree 0.0888, pedigree (2,5,2,1,4)
  (same comment as for Acetaldehyde)
- AOX, Adsorbable Organic Halogen [water, unspecified]: 1.51706e-5 kg; lognormal variance with pedigree 0.0403, pedigree (1,2,2,1,1)
  Data provided by industry (CEPI Eurokraft) 2018.
- Aluminium III [water, unspecified]: 8.6529e-6 kg; lognormal variance with pedigree 0.6503, pedigree (1,2,2,1,1)
  Data provided by industry (CEPI Eurokraft) 2018.
- Ammonium [water, unspecified]: 1.17578e-5 kg; lognormal variance with pedigree 0.0403, pedigree (1,2,2,1,1)
  Data provided by industry (CEPI Eurokraft) 2018.
- BOD5, Biological Oxygen Demand [water, unspecified]: 0.000312805 kg; lognormal variance with pedigree 0.0403, pedigree (1,2,2,1,1)
  Data provided by industry (CEPI Eurokraft) 2018.
- COD, Chemical Oxygen Demand [water, unspecified]: 0.00790558 kg; lognormal variance with pedigree 0.0403, pedigree (1,2,2,1,1)
  Data provided by industry (CEPI Eurokraft) 2018.
- Cadmium II [water, unspecified]: 2.6842e-9 kg; lognormal variance with pedigree 0.6503, pedigree (1,2,2,1,1)
  Data provided by industry (CEPI Eurokraft) 2018.
- Chloride [water, unspecified]: 0.000910441 kg; lognormal variance with pedigree 0.0403, pedigree (1,2,2,1,1)
  Data provided by industry (CEPI Eurokraft) 2018.
- Chromium III [water, unspecified]: 3.64544e-8 kg; lognormal variance with pedigree 0.6503, pedigree (1,2,2,1,1)
  Data provided by industry (CEPI Eurokraft) 2018.
- Copper ion [water, unspecified]: 1.76087e-7 kg; lognormal variance with pedigree 0.6503, pedigree (1,2,2,1,1)
  Data provided by industry (CEPI Eurokraft) 2018.
- DOC, Dissolved Organic Carbon [water, unspecified]: 0.00174977 kg; lognormal variance with pedigree 0.0428, pedigree (3,3,2,1,1)
  Assumed equal to TOC.
- EDTA, Ethylenediaminetetraacetic Acid [water, unspecified]: 6.46775e-7 kg; lognormal variance with pedigree 0.0403, pedigree (1,2,2,1,1)
  Data provided by industry (CEPI Eurokraft) 2018.
- Lead II [water, unspecified]: 3.19526e-8 kg; lognormal variance with pedigree 0.6503, pedigree (1,2,2,1,1)
  Data provided by industry (CEPI Eurokraft) 2018.
- Manganese II [water, unspecified]: 3.39054e-6 kg; lognormal variance with pedigree 0.6503, pedigree (1,2,2,1,1)
  Data provided by industry (CEPI Eurokraft) 2018.
- Mercury II [water, unspecified]: 1.33693e-9 kg; lognormal variance with pedigree 0.6503, pedigree (1,2,2,1,1)
  Data provided by industry (CEPI Eurokraft) 2018.
- Nickel II [water, unspecified]: 1.18385e-8 kg; lognormal variance with pedigree 0.6503, pedigree (1,2,2,1,1)
  Data provided by industry (CEPI Eurokraft) 2018.
- Nitrate [water, unspecified]: 2.31916e-5 kg; lognormal variance with pedigree 0.0403, pedigree (1,2,2,1,1)
  Data provided by industry (CEPI Eurokraft) 2018.
- Nitrogen [water, unspecified]: 0.000175006 kg; lognormal variance with pedigree 0.0403, pedigree (1,2,2,1,1)
  Data provided by industry (CEPI Eurokraft) 2018.
- Phosphorus [water, unspecified]: 1.34619e-5 kg; lognormal variance with pedigree 0.0403, pedigree (1,2,2,1,1)
  Data provided by industry (CEPI Eurokraft) 2018.
- Suspended solids, unspecified [water, unspecified]: 0.00124685 kg; lognormal variance with pedigree 0.0403, pedigree (1,2,2,1,1)
  Data provided by industry (CEPI Eurokraft) 2018.
- TOC, Total Organic Carbon [water, unspecified]: 0.00174977 kg; lognormal variance with pedigree 0.0403, pedigree (1,2,2,1,1)
  Data provided by industry (CEPI Eurokraft) 2018.
- Water [water, unspecified]: 0.0648206 m3; lognormal variance with pedigree 0.0403, pedigree (1,2,2,1,1)
  Data provided by industry (CEPI Eurokraft) 2018.
- Zinc II [water, unspecified]: 9.14186e-7 kg; lognormal variance with pedigree 0.6503, pedigree (1,2,2,1,1)
  Data provided by industry (CEPI Eurokraft) 2018.

## Sampling procedure
Data for the production of sack kraft paper were collected from mills together producing approximately 80% (1,592,115 tonnes) of the total annual production of sack kraft paper manufactured in Europe (the EU-27 countries plus Norway and Switzerland), based on estimations by CEPI Eurokraft. The figure represents the percentage of the total volume of sack kraft paper production by CEPI Eurokraft members which is produced by the mills participating in the survey. Not all Sack Kraft Paper producers in Europe are members of CEPI Eurokraft.

## Extrapolations
For a more complete air emission profile for kraft paper production additional air emissions (beyond the ones provided by the industry) were added for the combustion of internal and external fuels using LCI datasets for combustion of different fuels as proxy. Proxies for the air emissions were calculated based on: Heavy fuel oil: "heat production, heavy fuel oil, at industrial furnace 1MW” Light fuel oil and diesel: "heat production, light fuel oil, at industrial furnace 1MW” Natural gas, strong gases and methanol: "heat production, natural gas, at industrial furnace >100kW” Brown coal lignite: "heat production, lignite briquette, at stove 5-15kW” Biofuels, wood and bark: "heat production, wood chips from industry, at furnace 1000kW” No proxy was available for the combustion of black liquor, biological fibre slush, and tall oil. Emissions from these internal energy generation processes are therefore only reflected in the key emission factors provided by the industry. Amount of infrastructure taken from dataset “kraft paper production, unbleached, RER, 2000”. The underlying data and assumptions are documented in the following report: Hischier R., 2007, Life Cycle Inventories of Packaging and Graphical Paper, Final report ecoinvent data v2.0, 11, Dübendorf, CH The flow “chemical, organic” was used as proxy for “retention aids & polymers”, “defoamer”, and “wet strength additives”. “Lignite briquettes” was used as proxy for “Brown coal”. "Hazardous waste" flow was split 50/50 between ecoinvent waste flows: “Hazardous waste for incineration” and “Hazardous waste for underground landfill since the faith is unknown”.
