# natural gas, burned in micro gas turbine, 100kWe

Dataset: EcoSpold 2, unit process
Geography: CH
Time period: 2000-01-01 to 2022-12-31
Technology level: current
Classification: ISIC rev.4 ecoinvent: 3510:Electric power generation, transmission and distribution
Classification: EcoSpold01Categories: natural gas/cogeneration
Tags: with true value; ConvertedDataset
Scenario: Business-as-Usual
System model: Substitution, consequential, long-term
Generated by: Alex Primas
Published in: Primas A. 2007
Database: ecoinvent
isCopyrightProtected: true

## General comment
The multioutput-process 'natural gas, burned in micro gas turbine delivers the coproducts 'heat, natural gas, allocation exergy, at micro gas turbine 100kWe' and 'electricity, natural gas, allocation exergy, at micro gas turbine 100kWe'. The exergy allocation is the allocation scheme suggested to be used within the ecoinvent database (e.g. in electricity mixes).
[This dataset was already contained in the ecoinvent database version 2. It was not individually updated during the transfer to ecoinvent version 3. Life Cycle Impact Assessment results may still have changed, as they are affected by changes in the supply chain, i.e. in other datasets. This dataset was generated following the ecoinvent quality guidelines for version 2. It may have been subject to central changes described in the ecoinvent version 3 change report (http://www.ecoinvent.org/database/ecoinvent-version-3/reports-of-changes/), and the results of the central updates were reviewed extensively. The changes added e.g. consistent water flows and other information throughout the database. The documentation of this dataset can be found in the ecoinvent reports of version 2, which are still available via the ecoinvent website. The change report linked above covers all central changes that were made during the conversion process.]

## Included activities end
The module includes fuel input, infrastructure, emissions to air, and working materials for operation.

## Geography
Natural gas input modelled for Switzerland. Process applicable in central European conditions.

## Technology
Radial turbine with recuperation for preheating the compressed air and fuel gas booster to increase gas pressure. Operation with connection to low pressure gas network. Electrical efficiency 29%, total efficiency 75%. Operation as base load engine with low partial load hours.

## Reference product
- heat, central or small-scale, natural gas: 1 MJ; By-product classification allocatable product; CPC 17300: Steam and hot water
  production volume 0 MJ
    Unknown
    Included in other supplies of electricity from co-generation of natural gas
  property Corresponding fuel use 1.9806 MJ; name fuel_use; = 35.532*0.0256410256410256/0.46
    Lower heating value of the fuel input related to the heat/electricity output
  property exergy 0.169678 MJ
    allocation factor for electricity (=1) vs. heat, where heat is calculated as the termodynamic mean temperature Tm = (Tfeed-Treturn)/ln(Tfeed/Treturn), relative to the application temperature (Tu, typically = 293 K), i.e. (Tm-Tu)/Tm
  property price 0.01 EUR2005
    Temporary price data. Calculated as 90% of purchasers price based on: Average European district heat price from Ecoheatcool and Euroheat 2005-2006, Ecoheat Work package 1: The European heat market. Final report. http://www.solarthermalworld.org/files/Ecoheatcool%20WP1%20Web.pdf?download
  properties: carbon allocation 0 kg, carbon content 0, heating value, net 1 MJ, true value relation 0.169678

## Inputs from technosphere
- electricity, low voltage: -0.175122 kWh
  production volume
    Unknown
    Calculated from the production volume of heat, central or small-scale, natural gas in proportion to the respective output amounts.
  properties: exergy 3.6 MJ, price 0.107 EUR2005
  note on exergy: allocation factor for electricity (=1) vs. heat, where heat is calculated as the termodynamic mean temperature Tm = (Tfeed-Treturn)/ln(Tfeed/Treturn), relative to the application temperature (Tu, typically = 293 K), i.e. (Tm-Tu)/Tm
- lubricating oil: 1.08696e-6 kg; lognormal variance with pedigree 0.0412, pedigree (2,3,5,1,1)
  Company data
  Company data
  properties: carbon content, fossil 0.75, dry mass 1 kg, heating value, net 40.2 MJ, wet mass 1 kg
  note on carbon content, fossil: Lubricating oil is produced from diesel. C-content/dry mass of fats and oils considered 75%, from: ecoinvent v2.2 report, n 15a, pg 40
  note on heating value, net: Literature value, Source: IPCC 2006, 2006 IPCC Guidelines for National Greenhouse Gas Inventories, Prepared by the National Greenhouse Gas Inventories Programme, Eggleston H.S., Buendia L., Miwa K., Ngara T. and Tanabe K. (eds). Published: IGES, Japan
- maintenance, micro gas turbine, 100kW electrical: 2.16304e-7 unit; lognormal variance with pedigree 0.0412, pedigree (2,3,5,1,1)
  Uncertainty of maintenance cycle
  This exchange has an activity link directly to the producing activity because the product is primarily consumed in the same geographical area where it is produced.
- micro gas turbine, 100kW electrical: 4.32609e-8 unit; lognormal variance with pedigree 0.3512, pedigree (2,3,5,1,1)
  Uncertainty of life time
  This exchange has an activity link directly to the producing activity because the product is primarily consumed in the same geographical area where it is produced.
- natural gas, low pressure: 0.0557414 m3; lognormal variance with pedigree 0.2106, pedigree (5,5,5,5,5)
  Input
  Input
  properties: carbon content, fossil 0.695187, dry mass 1 kg, heating value, gross 39 MJ, heating value, net 36 MJ, wet mass 1 kg
  note on carbon content, fossil: C content considered the same as in high pressure (consumption mix)
  note on heating value, net: Literature value, Source: Christoph Meili;Niels Jungbluth;Maresa Bussa (2021) Life cycle inventories of crude oil and natural gas extraction. ESU-services Ltd. commissioned by BAFU & VSG, Schaffhausen, Switzerland, http://esu-services.ch/data/public-lci-reports/
- storage, 10'000 l: 1.79348e-8 unit; lognormal variance with pedigree 0.3512, pedigree (2,3,5,1,1)
  Uncertainty of life time
  Uncertainty of life time;activityLink introduced to establish a direct link to the corresponding regional supply of this product
- waste mineral oil: -1.19565e-6 kg; lognormal variance with pedigree 0.0288, pedigree (4,3,2,1,1)
  Calculated from oil input
  Calculated from oil input
  production volume
    Calculated from the production volume of heat, central or small-scale, natural gas in proportion to the respective output amounts.
  properties: carbon content, fossil 0.864444, dry mass 0.9 kg, heating value, net 34.7 MJ, water content 0.111111, wet mass 1 kg
  note on carbon content, fossil: Tab A.6, ecoinvent v2.2 report 13_I. C content has been calculated after data in the tables, and then referred to 1 kg DM
  note on heating value, net: Value taken from the general comment of the treatment dataset.

## Emissions to nature
- Carbon dioxide, fossil [air, urban air close to ground]: 0.121739 kg; lognormal variance with pedigree 0.0512, pedigree (2,5,5,5,1)
  Composition of natural gas
- Carbon monoxide, fossil [air, urban air close to ground]: 6.08696e-5 kg; lognormal variance with pedigree 0.6912, pedigree (2,3,5,1,1)
  Estimate based on different references
- Dinitrogen monoxide [air, urban air close to ground]: 2.17391e-6 kg; lognormal variance with pedigree 0.186, pedigree (4,5,5,1,4)
  Value for large gas power plants used as approximation
- Methane, fossil [air, urban air close to ground]: 1.17391e-5 kg; lognormal variance with pedigree 0.1086, pedigree (4,3,5,1,1)
  Estimate based on few references
- NMVOC, non-methane volatile organic compounds [air, urban air close to ground]: 1.30435e-6 kg; lognormal variance with pedigree 0.1086, pedigree (4,3,5,1,1)
  Estimate based on few references
- Nitrogen oxides [air, urban air close to ground]: 6.95652e-5 kg; lognormal variance with pedigree 0.0812, pedigree (2,3,5,1,1)
  Estimate based on different references
- Particulate Matter, < 2.5 um [air, urban air close to ground]: 1.08696e-6 kg; lognormal variance with pedigree 0.440025, pedigree (4,4,5,2,4)
  Value for large gas power plants used as approximation
- Sulfur dioxide [air, urban air close to ground]: 1.19565e-6 kg; lognormal variance with pedigree 0.0512, pedigree (2,5,5,5,1)
  Composition of natural gas

## Sampling procedure
Literature data and manufacturer information

## Review by Rolf Frischknecht 2007-08-13
passed
none

## Review by Emilia Moreno Ruiz 2012-04-16
calculation of fuel use property.
