# weaned calves production on native and planted pasture, Pantanal

Dataset: EcoSpold 2, unit process
Geography: BR
Time period: 2006-01-01 to 2022-12-31
Technology level: current
Classification: ISIC rev.4 ecoinvent: 0141:Raising of cattle and buffaloes
Scenario: Business-as-Usual
System model: Substitution, consequential, long-term
Share of production covered: 3 %
Generated by: Fernando Dias
Published in: Folegatti-Matsuura M. 2018
Database: ecoinvent
isCopyrightProtected: true

## General comment
This dataset represents the production of 1 kg of live weight of weaned calves for beef cattle, in Brazil, partly on native (70%) and partly on planted pasture (30% of total land), at farm, in Brazilian Pantanal biome, for fattening by other systems. Discarded cattle (bulls and culled cows) are considered by product. Culled cows are replaced by some of the weaned heifers, all other weaned heifers are sold for fattening by other systems, and are considered by product. Fences are the only infrastructure included. The production of young bulls for reproduction is not included, but their emissions in the farm and their live weight as product are considered. Direct field emissions are included, with important regionalizations added. Farm manure as an organic fertiliser is only accounted for in terms of direct field emissions.

## Included activities start
This activity starts at the replacing of culled cows by weaned heifers.

## Included activities end
This activity ends with the provision of weaned calves at farm gate, ready to be sent to slaughterhouses as live weight.

## Geography
'At more than 138 000 km2, the Brazilian Pantanal is known as the largest freshwater wetland in the world. The Pantanal is home to at least 650 species of birds, 260 species of fish, 80 mammal species, 50 species of reptiles (Wade et al., 1993), and more than 2000 identified floral species (Pott, 1998). Among its most renowned fauna are the jaguar, jaburu stork, blue hyacinth macaw, capybara, anaconda, giant anteater, coati and piranha. The Pantanal's principal economic activities include fishing, mining, tourism, and cattle ranching. Extensive cattle ranching has been the dominant economic activity and land use in the region for the past two centuries. About 95% of Pantanal lands are privately owned. About 80% (118 000 km2) of the lands are found on cattle ranches (Silva et al., 2000). The estimated present value of the existing herd of 3 million is about US$1 billion (Seidl et al., 1999).' Ecological Economics Volume 36, Issue 3, March 2001, Pages 413-425 Cattle ranching and deforestation in the Brazilian Pantanal
Andrew F Seidl Joao dos Santos Vila de Silva Andre Steffens Moraes.
https://doi.org/10.1016/S0921-8009(00)00238-X

## Technology
Mineral salt is served as supplement feed for all cattle in troughs on the field. Besides pasture and mineral salt, no suplement is served to cattle. The dataset does not include pharmaceuticals, although typical production systems use them. Use of hormones for cattle raising is forbidden in Brazil.

## Time period
Time period of the most of the data collected for this dataset.

## Parameters
- LUC_crop_specific: 1 dimensionless
  This parameter allows to switch between a 'crop specific' and a 'country specific' approach when calculating the LUC of a crop. By default, the chosen approach is 'crop specific', so the value of the parameter is 1. If you want to apply a 'country specific' approach, turn the parameter to 0.
- clay content into soil: 53.06 % (obsolete); name Clay_content; lognormal variance with pedigree 0.0573, pedigree (4,3,4,3,4)
  Fraction of clay content into soil. Used in the SQCB-NO3 model for the calculation of leaching of NO3. From Folegatti et al. (2015).
- emission factor N2O: 0.02 dimensionless; name EF_N2O; lognormal variance with pedigree 0.0573, pedigree (4,3,4,3,4)
  Emission factor of N2O from manure deposited in pasture. From IPCC (2006).
- fraction, process water to water, to surface water: 0.85 dimensionless
- fraction, process water, to air: 0.15 dimensionless
- nitrogen fertilizer, as N: 0 kg; name N_fert
  Nitrogen fertilizer (not urea) for fertilization. Parameter was kept because it is used in a formula that is the same for many datasets.
- nitrogen in manure on pasture: 1.4915 kg; name N_ex; lognormal variance with pedigree 0.0573, pedigree (4,3,4,3,4)
  Manure deposited on pasture, as N, per year and kg of product.
- nitrogen uptake by plant: 176.62 kg N/ha; name Nuptake_plant; lognormal variance with pedigree 0.0573, pedigree (4,3,4,3,4)
  N taken by plant during its growth. Used in the SQCB-NO3 model for the calculation of leaching of NO3. From Bernardi (2012).
- organic nitrogen into soil: 5520.7 kg N/ha; name Norg_soil; lognormal variance with pedigree 0.0573, pedigree (4,3,4,3,4)
  Mass of organic N contained in the upper 50 cm of soil per ha. Used in the SQCB-NO3 model for the calculation of leaching of NO3. From Folegatti et al. (2015).
- precipitation, annual: 1201.3 mm/year; name precipitation; lognormal variance with pedigree 0.0573, pedigree (4,3,4,3,4)
  Average annual precipitation in the BR-CO geographic region, calculated as the average of the 3 states of BR-CO weighted by their production volumes.Used in the SQCB-NO3 model for the calculation of leaching of NO3.
- rooting depth: 0.2205 m; name root_depth; lognormal variance with pedigree 0.0573, pedigree (4,3,4,3,4)
  Plant rooting depth for pasture. Used in the SQCB-NO3 model for the calculation of leaching of NO3. From Cunha et al. (2010).
- total nitrogen: 24.4926 kg/ha; name Ntot; = (N_ex + N_urea_fert + N_fert) / (T_t * 10^-4); lognormal variance with pedigree 0.0573, pedigree (4,3,4,3,4)
  Total nitrogen in mineral and organic fertilisers (kg N/ha)
- urea, as N, as fertilizer: 0 kg; name N_urea_fert
  Urea as fertilizer for pasture planting and maintenance. Parameter was kept because it is used in a formula that is the same for many datasets.

## Reference product
- weaned calves, live weight: 1 kg; name REF_PRODUCT; By-product classification allocatable product; CPC 02111: Cattle; EcoSpold01Categories agricultural production/animal production
  Weaned calves sold.
  production volume 5.18488e7 kg
    Calculated from cattle for slaughtering production volume.
  property carbon content, fossil 0; name REF_PRODUCT_C_content_fossil
    fossil carbon content on a dry matter basis
  property carbon content, non-fossil 0.4928; name REF_PRODUCT_C_content_non_fossil
    biogene carbon content on a dry matter basis
  property energy content 14.937 MJ; name REF_PRODUCT_energy_content
    as gross calorific value (when relevant)
  property price 1.57 EUR2005
    Current price for weaners is R 35/kg. Suggested price [7]: 2.1 €/kg
    Suggest to use the same price for heifers.Source: http://www.mpo.co.za/wp-content/uploads/2018/04/Agri-Trends-23-April-2018-GrainsOilseedsLlivestock-Fibre-.pdf
  property water content 0.666667; name REF_PRODUCT_water_content; = REF_PRODUCT_WWM / REF_PRODUCT_DM
  property water in wet mass 0.4 kg; name REF_PRODUCT_WWM
  properties: carbon allocation 0.29568 kg, carbon content 0.4928, dry mass 0.6 kg, wet mass 1 kg

## Inputs from technosphere
- cattle for slaughtering, live weight: -0.99391 kg; name BY_PRODUCT_2
  Culled cows and bulls.
  production volume
    (BR beef production in 2015) * (% of system in BR in 2015) * (1 - % beef production from milk cattle in BR) / (carcass as live weight, BR average).
  property carbon content, non-fossil 0.4928; name BY_PRODUCT_2_C_content_non_fossil
  property dry mass 0.6 kg; name BY_PRODUCT_2_DM; = BY_PRODUCT_2_WM - BY_PRODUCT_2_WWM
  property energy content 14.9367 MJ; name BY_PRODUCT_2_energy_content
  property water in wet mass 0.4 kg; name BY_PRODUCT_2_WWM
  properties: price 1.25 EUR2005, water content 0.666667, wet mass 1 kg
  note on carbon content, non-fossil: Calculated from live weight empty body composition in fat and protein ( Johnson, I.R. et al. (2012). J. Anim. Sci. 90(13):4741-475 ; Williams, C.B. (2005). J. Anim. Sci. 83(6):1262-1266) and from C content of nutrients (protein, fat) according to A.D. Kay and T. Vrede ('Evolutionary and Biochemical Aspects', in Global Ecology, 2010, Elsevier B.V., S.E. Jørgensen Ed.).
  note on energy content: Energy content calculated from animal fat and protein composition and energy content for animal fat and protein of 39.3 and 23.6 MJ/kg, respectively. Johnson, I.R. et al. (2012). J. Anim. Sci. 90(13):4741-475. Williams, C.B. (2005). J. Anim. Sci. 83(6):1262-1266.
- fertilising, by broadcaster: 0.00091802 ha; lognormal variance with pedigree 0.0439, pedigree (3,3,5,3,2)
  Activity link to BR dataset, as there is no market modeled for this activity in BR region.
- inorganic phosphorus fertiliser, as P2O5: 0.073442 kg; lognormal variance with pedigree 0.0439, pedigree (3,3,5,3,2)
  Phosphate fertilizer for pasture replanting or maintenance.
  properties: dry mass 1 kg, wet mass 1 kg
- inorganic potassium fertiliser, as K2O: 0.055081 kg; lognormal variance with pedigree 0.0439, pedigree (3,3,5,3,2)
  Potassium fertilizer for pasture replanting and maintenance.
  properties: dry mass 1 kg, wet mass 1 kg
- iron scrap, unsorted: -0.0016387 kg; name BY_PRODUCT_3; = wire; lognormal variance with pedigree 0.0119, pedigree (3,3,4,3,2)
  Fencing the farm: steel wire.
  production volume
    Calculated from production volume of reference product using the relative outputs.
  properties: dry mass 1 kg, price 0.149 EUR2005, wet mass 1 kg
- land use change, pasture, man made: 0.0014615 ha; = (0.00487168*LUC_crop_specific+(0.0100988186850314*(1-LUC_crop_specific)))*0.3
  Calculated value. Land use change (LUC) related to the planted pasture only (native pasture not included). From Novaes et al. (2017).
- lime: 1.377 kg; lognormal variance with pedigree 0.0439, pedigree (3,3,5,3,2)
  Lime applied for pasture replanting or maintenance.
  properties: carbon content, fossil 0.120005, dry mass 1 kg, wet mass 1 kg
- limestone and gypsum application, by spreader: 0.00091802 ha; lognormal variance with pedigree 0.0439, pedigree (3,3,5,3,2)
  Activity link to BR dataset, as there is no market modeled for this activity in BR region.
- mineral supplement, for beef cattle: 0.482869 kg; lognormal variance with pedigree 0.0458, pedigree (3,3,5,5,2)
  Mineral supplement is used to raise the cattle. The need of mineral supplement depend on animal weight, function and season and varies from 10 g (calves and heifers right after decalving) to 80 g (bulls in the system for reproduction only) per day. Each herd stays on the system from 8 months (heifers sold right right after decalving) up to 5 years (bulls and cows for reproduction). This is a weghted average considering the live weight of each animal, the amount per live-weight perscribed to each animal for each season, and the time the animal stays on system for each season.
  properties: dry mass 1 kg, wet mass 1 kg
- sawlog and veneer log, eucalyptus ssp., measured as solid wood under bark: 9.355e-8 m3; name poles; lognormal variance with pedigree 0.0439, pedigree (3,3,5,3,2)
  Fencing the farm: roundwood from eucalyptus for poles.
  properties: carbon content, non-fossil 0.494, dry mass 825 kg, heating value, net 11336.5 MJ, water content 0.5, wet mass 1237.5 kg
- sowing: 0.00091802 ha; lognormal variance with pedigree 0.0439, pedigree (3,3,5,3,2)
  Activity link to BR dataset, as there is no market modeled for this activity in BR region.
- steel, unalloyed: 0.0016387 kg; = wire; lognormal variance with pedigree 0.0439, pedigree (3,3,5,3,2)
  Fencing the farm: steel wire.
  properties: carbon content, fossil 0.0025, dry mass 1 kg, wet mass 1 kg
- tillage, harrowing, by offset disc harrow: 0.00091802 ha; lognormal variance with pedigree 0.0439, pedigree (3,3,5,3,2)
  Activity link to BR dataset, as there is no market modeled for this activity in BR region.
- tillage, harrowing, by offset leveling disc harrow: 0.001836 ha; lognormal variance with pedigree 0.0439, pedigree (3,3,5,3,2)
  Activity link to BR dataset, as there is no market modeled for this activity in BR region.
- waste wood pole, chrome preserved: -0.000115768 kg; name BY_PRODUCT_1; = poles*1237.5; lognormal variance with pedigree 0.0119, pedigree (3,3,4,3,2)
  Fencing the farm: waste wood poles from fences (after periodic replacement).
  production volume
    Calculated from production volume of reference product using the relative outputs.
  properties: carbon content, non-fossil 0.483676, dry mass 0.8 kg, heating value, net 13.99 MJ, water content 0.25, wet mass 1 kg
  note on heating value, net: Value taken from the general comment of the treatment dataset.
- weaned heifers, live weight: -0.54347 kg; name BY_PRODUCT
  Weaned heifers sold.
  production volume
    Calculated from cattle for slaughtering production volume.
  property carbon content, fossil 0; name BY_PRODUCT_C_content_fossil
  property carbon content, non-fossil 0.4928; name BY_PRODUCT_C_content_non_fossil
  property energy content 14.937 MJ; name BY_PRODUCT_energy_content
  property water content 0.666667; name BY_PRODUCT_water_content; = BY_PRODUCT_WWM / BY_PRODUCT_DM
  property water in wet mass 0.4 kg; name BY_PRODUCT_WWM
  properties: dry mass 0.6 kg, price 1.18 EUR2005, wet mass 1 kg
- weed control, by brush cutter, pasture: 0.0036721 ha; lognormal variance with pedigree 0.0439, pedigree (3,3,5,3,2)
  Activity link to BR dataset, as there is no market modeled for this activity in BR region.
- wire drawing, steel: 0.0016387 kg; name wire; lognormal variance with pedigree 0.0439, pedigree (3,3,5,3,2)
  Fencing the farm: steel wire.
- wood preservation, vacuum pressure method, inorganic salt, containing Cr, outdoor use, ground contact: 8.1108e-5 kg; name WOOD; lognormal variance with pedigree 0.0439, pedigree (3,3,5,3,2)
  Fencing the farm: poles preservation by treatment with inorganic CCB (chromium, copper, boron) salt with the vacuum pressure method. Emissions in farm or after used were not included.
- zinc coat, pieces: 0.00038916 m2; lognormal variance with pedigree 0.0439, pedigree (3,3,5,3,2)
  Fencing the farm: steel wire zinc coating.

## Inputs from nature
- Energy, gross calorific value, in biomass [natural resource, biotic]: 37.9005 MJ; = REF_PRODUCT_energy_content + BY_PRODUCT_energy_content * BY_PRODUCT + BY_PRODUCT_2_energy_content * BY_PRODUCT_2; lognormal variance with pedigree 0.0439, pedigree (3,3,5,3,2)
  Balance of energy content, considering product, by-product and the main exchanges from technosphere, only.
- Occupation, pasture, man made [natural resource, land]: 608.96 m2*year; name T_t; lognormal variance with pedigree 0.0453, pedigree (3,3,5,3,2)
  From Folegatti et al. (2015).
- Transformation, from pasture, man made [natural resource, land]: 9.1344 m2; = T_t*1/20*0.3; lognormal variance with pedigree 0.0513, pedigree (3,3,5,3,2)
  Land transformation related to the planted pasture only (native pasture not included). From Folegatti et al. (2015).
- Transformation, to pasture, man made [natural resource, land]: 9.1344 m2; = T_t*1/20*0.3; lognormal variance with pedigree 0.0513, pedigree (3,3,5,3,2)
  (same comment as for Transformation, from pasture, man made)
- Water, unspecified natural origin [natural resource, in water]: 0.458098 m3; name drinking_water; lognormal variance with pedigree 0.0458, pedigree (3,3,5,5,2)
  Drinking water for animals, from well, lakes, rivers or rain. Consumption of 0.14 liters per day per kg of cattle live weight was multiplied per kg of average live weight for each heard category. Consumption per kg of live weight was estimated from PALHARES, 2013 considering that each range of weight and consumption begins at the end of the previous range, and that the first range presented on Palhares, 2013 begins at the average weight of weaned calves (170 kg).

## Emissions to nature
- Ammonia [air, non-urban air or from high stacks]: 0.0651999 kg; name NH3; = 17/14 * (N_fert*0.20 + N_ex*0.6*0.06); lognormal variance with pedigree 0.0513, pedigree (3,3,5,3,2)
  NH3 emissions from applied mineral fertilisers are calculated by constant emission factors for each group of fertiliser. For Urea 20%. See Nemecek et al. (2015).
- Carbon dioxide, fossil [air, non-urban air or from high stacks]: 0.65637 kg; = 44/12 * 0.13 * lime + 1.57 * N_fert; lognormal variance with pedigree 0.0439, pedigree (3,3,5,3,2)
  Emissions of CO2 to air from limestone and urea application based on IPCC (2006).
- Dinitrogen monoxide [air, non-urban air or from high stacks]: 0.0477195 kg; name N2O; = 44/28*(0.01*N_fert + 0.01*14/17*NH3 + 0.0075*14/62*NO3 + N_ex * EF_N2O); lognormal variance with pedigree 0.0733, pedigree (3,3,5,3,2)
  Emissions of N2O to the air from drylot and pasture, with no N from crop residues or feedlot. See IPCC (2006).
- Methane, non-fossil [air, non-urban air or from high stacks]: 1.1122 kg; lognormal variance with pedigree 0.0513, pedigree (3,3,5,3,2)
  Enteric fermentation and manure management (IPCC, 2006).
- Nitrogen oxides [air, non-urban air or from high stacks]: 0.0100211 kg; = N2O*0.21; lognormal variance with pedigree 0.0733, pedigree (3,3,5,3,2)
  Emissions of NOx to the air. See '2.5 EMISSIONS OF NOX TO THE AIR' in Nemecek and Schnetzer (2011).
- Water [air, unspecified]: 0.0687146 m3; = drinking_water*fraction_PW_to_air; lognormal variance with pedigree 0.0439, pedigree (3,3,5,3,2)
- Cadmium II [soil, agricultural]: 0.0019126 kg; normal variance with pedigree 0.0626, pedigree (3,3,5,3,2)
  Emissions of heavy metals to soil and surface water estimated from mineral fertilisers and liming as recommended by Canals (2003) and regionalized following Folegatti et al. (2015).
- Chromium III [soil, agricultural]: 0.01602 kg; normal variance with pedigree 0.0626, pedigree (3,3,5,3,2)
  (same comment as for Cadmium II)
- Copper ion [soil, agricultural]: 0.12638 kg; normal variance with pedigree 0.0626, pedigree (3,3,5,3,2)
  (same comment as for Cadmium II)
- Lead II [soil, agricultural]: 0.017605 kg; normal variance with pedigree 0.0626, pedigree (3,3,5,3,2)
  (same comment as for Cadmium II)
- Nickel II [soil, agricultural]: 0.024715 kg; normal variance with pedigree 0.0626, pedigree (3,3,5,3,2)
  (same comment as for Cadmium II)
- Zinc II [soil, agricultural]: 0.58592 kg; normal variance with pedigree 0.0626, pedigree (3,3,5,3,2)
  (same comment as for Cadmium II)
- Cadmium II [water, surface water]: 1.9128e-7 kg; normal variance with pedigree 0.1126, pedigree (3,3,5,3,2)
  (same comment as for Cadmium II)
- Chromium III [water, surface water]: 1.6022e-6 kg; normal variance with pedigree 0.1126, pedigree (3,3,5,3,2)
  (same comment as for Cadmium II)
- Copper ion [water, surface water]: 1.2639e-5 kg; normal variance with pedigree 0.1126, pedigree (3,3,5,3,2)
  (same comment as for Cadmium II)
- Lead II [water, surface water]: 1.7606e-6 kg; normal variance with pedigree 0.1126, pedigree (3,3,5,3,2)
  (same comment as for Cadmium II)
- Nickel II [water, surface water]: 2.4717e-6 kg; normal variance with pedigree 0.1126, pedigree (3,3,5,3,2)
  (same comment as for Cadmium II)
- Phosphorus [water, surface water]: 0.00430413 kg; = T_t*10^-4 * 200 * 0.00095 * 1.86 * 0.2; lognormal variance with pedigree 0.0833, pedigree (3,3,5,3,2)
  As phosphorus leaching must be disregarded due to its low mobility in Brazilian soils (Novais & Smyth, 1999), only P emission by water erosion through surface water was considered, as in '2.3.3 Phorsphorous Emissions Through Water Erosion to Surface Water' Nemecek and Schnetzer (2011). Soil eroded is 200 kg/ha.yr.
- Water [water, surface water]: 0.389383 m3; = drinking_water*fraction_PWtoW_to_surface_water; lognormal variance with pedigree 0.0439, pedigree (3,3,5,3,2)
- Zinc II [water, surface water]: 5.8598e-5 kg; normal variance with pedigree 0.1126, pedigree (3,3,5,3,2)
  (same comment as for Cadmium II)

## Sampling procedure
Inventory data for cattle systems obtained from Embrapa’s PECUS Project, literature and expert knowledge. Emissions from the agricultural process estimated according to Nemecek and Schnetzer (2011) and Canals (2003) and other references mentioned.

## Extrapolations
Carbon content, water and gross calorific value are based on ecoinvent database.
