# ethanol production from whey

Dataset: EcoSpold 2, unit process
Geography: RoW
Time period: 2000-01-01 to 2022-12-31
Technology level: current
Classification: ISIC rev.4 ecoinvent: 2011:Manufacture of basic chemicals
Classification: EcoSpold01Categories: biomass/production
Scenario: Business-as-Usual
System model: Substitution, consequential, long-term
Share of production covered: 0 %
Generated by: trainee ecoinvent
Published in: Jungbluth N. 2007
Database: ecoinvent
isCopyrightProtected: true

## General comment
The multioutput-process "whey, to fermentation" delivers the co-products Ethanol, 95% in H20, from whey", "yeast paste from whey", and "portein concentrate rom whey". The allocation is based on economic criteria. The production of ethanol from whey is of no economical importance in the world.
[This dataset is meant to replace the following datasets:
- treatment of whey by fermentation, GLO, 2000 - 2004]

## Included activities end
Fermentation of whey including materials, energy uses, infrastructure, and emissions.

## Geography
The inventory is modelled with data from a plant in Ireland.

## Technology
Production of ethanol from whey with the Carbery process.

## Parameters
- fraction, cooling water, cooling pond system, to air: 0.032 dimensionless; lognormal variance with pedigree 0.0413, pedigree (2,3,1,3,1)
- fraction, cooling water, once-through system, to air: 0.004 dimensionless; lognormal variance with pedigree 0.0413, pedigree (2,3,1,3,1)
- fraction, cooling water, recirculating system, to air: 0.771 dimensionless; lognormal variance with pedigree 0.0413, pedigree (2,3,1,3,1)
- fraction, cooling water, to air: 0.64 dimensionless; lognormal variance with pedigree 0.092025, pedigree (4,4,3,2,4)
- fraction, process water, to air: 0.205 dimensionless; lognormal variance with pedigree 0.092025, pedigree (4,4,3,2,4)
- fraction, tap water, to air: 0.205 dimensionless; lognormal variance with pedigree 0.092025, pedigree (4,4,3,2,4)

## Reference product
- whey: 1 kg; name whey_amount_1; By-product classification allocatable product; CPC 22130: Whey
  Eners 2005
  production volume 1 kg
  properties: carbon allocation 0.0218084 kg, carbon content 0.340757, carbon content, fossil 0, carbon content, non-fossil 0.340757, dry mass 0.064 kg, price 0 EUR2005, water content 14.625, water in wet mass 0.936 kg, wet mass 1 kg

## Inputs from technosphere
- electricity, medium voltage: -0.000625092, -0.000433057, -2.32116e-5, -0.000629019, -0.00515743, -2.33879e-5, -0.000115753, -0.000297151 kWh (8 suppliers, which the file names only by identifier); sum of these -0.0073041 kWh; lognormal variance with pedigree 0.042, pedigree (1,1,5,5,1)
  EcoSpold01Location=CH
  Eners 2005
  Uncertainty: Eners 2005
- ethanol fermentation plant: -1.07e-11 unit; lognormal variance with pedigree 0.3626, pedigree (2,4,5,5,3)
  EcoSpold01Location=CH
  Estimation
  Uncertainty: Estimation
- ethanol, without water, in 95% solution state, from fermentation: 0.00291021, 0.0146088 kg (2 suppliers, which the file names only by identifier); sum of these 0.017519 kg
  production volume
    Source: FAOSTAT total global production volume of dried whey averaged over 2002-2004. It is estimated, that 30% of whey is then used for fermentation to produce ethanol.
  properties: carbon content, non-fossil 0.521739, dry mass 1 kg, heating value, net 28.1 MJ, price 0.324 EUR2005, wet mass 1 kg
  note on heating value, net: Based on literature, page 275, Report 17: Jungbluth, N., Chudacoff, M., Dauriat, A., Dinkel, F., Doka, G., Faist Emmenegger, M., Gnansounou, E., Kljun, N., Schleiss, K., Spielmann, M., Stettler, C., Sutter, J. 2007: Life Cycle Inventories of Bioenergy. ecoinvent report No. 17, Swiss Centre for Life Cycle Inventories, Dübendorf, CH.
- fodder yeast: 0.020042 kg; name BP_amount_2
  EcoSpold01Location=CH
  production volume
    The world production of ethanol from whey was 6.8 Million litres per year.
    Calculated from the production volume of whey in proportion to the respective output amounts.
  properties: carbon content, non-fossil 0.51763, dry mass 0.92 kg, price 1.42 EUR2005, water content 0.0869565, wet mass 1 kg
  note on carbon content, non-fossil: considered pure protein (ecoinvent v2.2 report 17, pg 288). C-content in protein is estimated to be 53% ( from "Evolutionary and Biochemical Aspects", A.D. Kay and T. Vrede (in Global Ecology, 2010, Elsevier B.V., S.E. Jørgensen Ed.). Composition data obtained from Levure fourragère (http://www.feed-alp.admin.ch/start.php?action=adv_search&cmd=list_feed ). First, composition data were refered to 1 kg dry mass. Then, C-contents were calculated considering a C-content/dry mass of 46% in carbohydrates (including fibres), 53% in proteins and 75% in fats. All data from "Evolutionary and Biochemical Aspects", A.D. Kay and T. Vrede (in Global Ecology, 2010, Elsevier B.V., S.E. Jørgensen Ed.). Finally, C-content in kg was multiplied by kg dry mass in the exchange.
- heat, central or small-scale, other than natural gas: -0.0673321, -0.000143948 MJ (2 suppliers, which the file names only by identifier); sum of these -0.067476 MJ; lognormal variance with pedigree 0.042, pedigree (1,1,5,5,1)
  EcoSpold01Location=CH
  Frometin 2000
  Uncertainty: Frometin 2000
  properties: heating value, net 1 MJ
- heat, district or industrial, natural gas: -0.0118765, -0.0335831, -0.0782703 MJ (3 suppliers, which the file names only by identifier); sum of these -0.12373 MJ; lognormal variance with pedigree 0.042, pedigree (1,1,5,5,1)
  EcoSpold01Location=RER
  Eners 2005
  Uncertainty: Eners 2005
  properties: heating value, net 1 MJ
- protein feed, 100% crude: 0.10384 kg; name BP_amount_1
  production volume
    Calculated from production volume of reference product using the relative outputs. The world production of ethanol from whey was 6.8 Million litres per year.
    Calculated from the production volume of whey in proportion to the respective output amounts.
  properties: carbon content, non-fossil 0.53, dry mass 1 kg, price 0.424 EUR2005, wet mass 1 kg
  note on carbon content, non-fossil: considered pure protein (ecoinvent v2.2 report 17, pg 288). C-content in protein is estimated to be 53% ( from "Evolutionary and Biochemical Aspects", A.D. Kay and T. Vrede (in Global Ecology, 2010, Elsevier B.V., S.E. Jørgensen Ed.).
- soda ash, light: -0.00080081 kg; lognormal variance with pedigree 0.042, pedigree (1,1,5,5,1)
  Eners 2005
  EcoSpold01Location=RER
  Uncertainty: Eners 2005
  properties: carbon content, fossil 0.0517241, dry mass 1 kg, heating value, net 3.43 MJ, wet mass 1 kg
- sodium phosphate: -0.00010179 kg; lognormal variance with pedigree 0.042, pedigree (1,1,5,5,1)
  EcoSpold01Location=RER
  Eners 2005
  Uncertainty: Eners 2005
  properties: dry mass 1 kg, wet mass 1 kg
- sodium sulfate, anhydrite: -3.8893e-5 kg; lognormal variance with pedigree 0.042, pedigree (1,1,5,5,1)
  Eners 2005
  EcoSpold01Location=RER
  Uncertainty: Eners 2005
  properties: dry mass 1 kg, wet mass 1 kg
- sulfuric acid: -0.00044376 kg; lognormal variance with pedigree 0.042, pedigree (1,1,5,5,1)
  Eners 2005
  EcoSpold01Location=RER
  Uncertainty: Eners 2005
  properties: dry mass 1 kg, wet mass 1 kg
- tap water: -0.0025203, -0.0126689, -0.00470276, -4.23885e-5, -0.00165329, -0.0141534, -0.0635521, -0.0182568 kg (8 suppliers, which the file names only by identifier); sum of these -0.11755 kg; lognormal variance with pedigree 0.042, pedigree (1,1,5,5,1)
  EcoSpold01Location=CH
  Eners 2005
  Uncertainty: Eners 2005
  properties: carbon content, fossil 0.00178991, dry mass 0.000337476 kg, water content 2962.17, wet mass 1 kg
  note on carbon content, fossil: Bicarbonate content is 2.93 mol/m3. CO2 content is 0.1 mol/m3 (ecoinvent v2.2 report 8, Tab 93.1).

## Inputs from nature
- Water, cooling, unspecified natural origin [natural resource, in water]: -2.516e-5 m3; lognormal variance with pedigree 0.042, pedigree (1,1,5,5,1)
  Eners 2005
  Uncertainty: Eners 2005

## Emissions to nature
- Carbon dioxide, non-fossil [air, urban air close to ground]: -0.050336 kg; lognormal variance with pedigree 0.042, pedigree (1,1,5,5,1)
  Calculated from the carbon balance
  Uncertainty: Calculated from the carbon balance
- Water [air, unspecified]: -4.01973e-5 m3; lognormal variance with pedigree 0.0827, pedigree (2,2,5,5,1)
  Calculated value based on literature values and expert opinion. See comments in the parametres' comment field.
- BOD5, Biological Oxygen Demand [water, surface water]: -0.00078837 kg; lognormal variance with pedigree 0.1001, pedigree (1,2,5,5,3)
  Calculated from the water emissions
  Uncertainty: Calculated from the water emissions
- COD, Chemical Oxygen Demand [water, surface water]: -0.00078837 kg; lognormal variance with pedigree 0.1001, pedigree (1,2,5,5,3)
  Calculated from the water emissions
  Uncertainty: Calculated from the water emissions
- DOC, Dissolved Organic Carbon [water, surface water]: -0.00031535 kg; lognormal variance with pedigree 0.092, pedigree (3,5,5,5,1)
  Extrapolation for sum parameter
  Uncertainty: Extrapolation for sum parameter
- TOC, Total Organic Carbon [water, surface water]: -0.00031535 kg; lognormal variance with pedigree 0.1001, pedigree (1,2,5,5,3)
  Calculated from the water emissions
  Uncertainty: Calculated from the water emissions
- Water [water, unspecified]: -0.000102508 m3; lognormal variance with pedigree 0.0827, pedigree (2,2,5,5,1)
  (same comment as for Water)
  property carbon content, fossil 0; name C_content_fossil
  property carbon content, non-fossil 0; name C_content_non_fossil
  property water in wet mass 1000 kg; name WWM

## Sampling procedure
Literature data

## Extrapolations
Some data are derived from other or unknown plants or have been estimated. This dataset has been copied from an original dataset covering the geography CH. The uncertainty has been adjusted accordingly.
