# skimmed milk, from cow milk to generic market for protein feed

Dataset: EcoSpold 2, unit process
Geography: GLO
Time period: 2014-01-01 to 2022-12-31
Technology level: current
Classification: ISIC rev.4 ecoinvent: 1080:Manufacture of prepared animal feeds
Scenario: Business-as-Usual
System model: Substitution, consequential, long-term
Generated by: Tereza Levova
Database: ecoinvent
isCopyrightProtected: true

## General comment
This activity is a linking activity, i.e. it connects skimmed milk with generic protein feed market. Skimmed milk is produced as a by-product in butter production. Skimmed milk can be used either for direct human consumption or as a feed for animals. This activity supply part of the skimmed milk to the generic market for protain feed, where it is traded with other protein - containing products.

## Included activities end
Skimmed milk is a by-product from butter production. This linking activity has the skimmed milk as an input and protein and energy feed as output.

## Parameters
- fraction, to generic market: 0.2 dimensionless; name fraction_to_generic_market; lognormal variance with pedigree 0.0086, pedigree (4,1,1,1,1)
  It is assumed that 20% of skimmed milk is traded on the generic protein feed market, i.e. its buyers do not care what type of protein feed they are buying. Remaining 80% of the annual production volume is assumed to be used for uses, where specific type of protein feed is required and cannot be substituted by another protein feed.

## Reference product
- skimmed milk, from cow milk: 1 kg; By-product classification allocatable product; CPC 22110: Processed liquid milk; lognormal variance with pedigree 0.0458, pedigree (3,4,5,4,2)
  production volume 1 kg
  property ash content 0.081878 kg
    Calculated based on literature data (USDA, National Nutrient Database for Standard Reference, accessed 20130123), "Milk, nonfat, fluid, without added vitamin A and vitamin D (fat free or skim)".
  property carbohydrates content 0.541485 kg
    (same comment as for skimmed milk, from cow milk)
  property carbon content, non-fossil 0.4506
    Calculated value. Biogene carbon content on a dry matter basis.
  property fat (total lipid) content 0.008734 kg
    (same comment as for skimmed milk, from cow milk)
  property fibre (total dietary) content 0 kg
    (same comment as for skimmed milk, from cow milk)
  property protein content 0.3979
    (same comment as for skimmed milk, from cow milk)
  properties: carbon allocation 0.041275 kg, carbon content 0.4506, carbon content, fossil 0, dry mass 0.0916 kg, price 0 EUR2005, water content 9.917, water in wet mass 0.9084 kg, wet mass 1 kg

## Inputs from technosphere
- energy feed, gross: 0.828815, 17.2412 MJ (2 suppliers, which the file names only by identifier); sum of these 18.07 MJ; lognormal variance with pedigree 0.0078, pedigree (3,4,3,4,2)
  Literature value (Agroscope, Swiss Feed Database, www.feedbase.ch, accessed 20130127).
  18.027 MJ/kg of DM is the amount of energy feed, gross in "Skimmed milk, fresh"
  production volume
    Calculated from production volume of reference product using the relative outputs.
  properties: dry mass 1 kg, price 0.0108 EUR2005, wet mass 1 kg
- protein feed, 100% crude: 0.359692 kg; name protein_feed_RP
  Literature value (Agroscope, Swiss Feed Database, www.feedbase.ch, accessed 20130127).
  0.35969 kg/kg of DM is the amount of crude protein in "Skimmed milk, fresh"
  production volume
    Calculated based on literature value and an estimate.
    1.138E+11 kg is the global production volume of skimmed milk (FAOSTAT, "milk, skimmed cow", data for year 2011, accessed 20130127).
    It is estimated, that 20% of skimmed milk produced goes to generic market for protein feed.
  properties: carbon content, non-fossil 0.53, dry mass 1 kg, price 0.424 EUR2005, wet mass 1 kg
