# molecular sieve separation of naphtha

Dataset: EcoSpold 2, unit process
Geography: RER
Time period: 1998-01-01 to 2022-12-31
Technology level: current
Classification: ISIC rev.4 ecoinvent: 1920:Manufacture of refined petroleum products
Classification: EcoSpold01Categories: chemicals/organics
Tags: ConvertedDataset
Scenario: Business-as-Usual
System model: Substitution, consequential, long-term
Share of production covered: 0 %
Generated by: Jürgen Sutter
Published in: Jungbluth N. 2007
Database: ecoinvent
isCopyrightProtected: true

## General comment
The multioutput-process "naphta, to melecular sieve separations" delivers the co-products hexane, heptane, 2,3-dimethylbutane, 2-methylpentane, methylcyclopentane, 1,1-dimethylcyclopentane, methylcyclohexane, fraction 1 from naphta, fraction 7 from naphta, and fraction 8 from naphta. The allocation is based on mass balance.
[This dataset was already contained in the ecoinvent database version 2. It was not individually updated during the transfer to ecoinvent version 3. Life Cycle Impact Assessment results may still have changed, as they are affected by changes in the supply chain, i.e. in other datasets. This dataset was generated following the ecoinvent quality guidelines for version 2. It may have been subject to central changes described in the ecoinvent version 3 change report (http://www.ecoinvent.org/database/ecoinvent-version-3/reports-of-changes/), and the results of the central updates were reviewed extensively. The changes added e.g. consistent water flows and other information throughout the database. The documentation of this dataset can be found in the ecoinvent reports of version 2, which are still available via the ecoinvent website. The change report linked above covers all central changes that were made during the conversion process.]

## Included activities end
Molecular sieve separation of naphta including materials, energy uses, infrastructure and emissions.

## Geography
The inventory is modelled with data from plants in the USA.

## Technology
Separation of naphta with a zeolith 5a molecular sieve.

## Time period
Time of publications.

## Parameters
- fraction, cooling water, cooling pond system, to air: 0.032 dimensionless; name fraction_CW_CP_to_air; lognormal variance with pedigree 0.0413, pedigree (2,3,1,3,1)
  Calculated based on literature value (Scown, C.D., 2011, Water Footprint of U.S. Transportation Fuels and supplying information of the article) (Vionnet, S., Quantis Water Database - Technical Report, 2012).
- fraction, cooling water, once-through system, to air: 0.004 dimensionless; name fraction_CW_OT_to_air; lognormal variance with pedigree 0.0413, pedigree (2,3,1,3,1)
  (same comment as for fraction, cooling water, cooling pond system, to air)
- fraction, cooling water, recirculating system, to air: 0.771 dimensionless; name fraction_CW_R_to_air; lognormal variance with pedigree 0.0413, pedigree (2,3,1,3,1)
  (same comment as for fraction, cooling water, cooling pond system, to air)
- fraction, cooling water, to air: 0.3875 dimensionless; name fraction_CW_to_air; = (0.5*fraction_CW_OT_to_air)+(0.5*fraction_CW_R_to_air); lognormal variance with pedigree 0.092025, pedigree (4,4,3,2,4)
  Calculated value based on literature value (see comments of the other parametres present in this dataset) and expert opinion. In the case when no industry/literature data are available about the type of cooling or directly fraction, cooling water, to air specific for the process a default assumption is applied. It is assumed that the once-through cooling system is used in 50% of all cases and recirculating system is used in another 50% of all cases.

## Reference product
- hexane: 1 kg; name RP_amount_1; By-product classification allocatable product; CPC 333: Petroleum oils and oils obtained from bituminous materials, other than crude; preparations n.e.c. containing by […]; CAS 110-54-3
  production volume 1.71875e8 kg
    Esimated to be 1/3 of global production
  property heating value, net 45.02 MJ
    LHV is calculated based on the elemental composition of the substance. Based on the CAS number of the substance (000110-54-3), the chemical formula of the substance is found to be: C6H14, (PubChem 2020).
    Reference: Kim, S., Chen, J., Cheng, T., Gindulyte, A., He, J., He, S., Li, Q., Shoemaker, B. A., Thiessen, P. A., Yu, B., Zaslavsky, L., Zhang, J., & Bolton, E. E. (2019). PubChem 2019 update: improved access to chemical data. Nucleic acids research, 47(D1), D1102–D1109. https://doi.org/10.1093/nar/gky1033
  property price 0.326 EUR2005
    Temporary price data. Calculated as 90% of purchasers price based on: Source: 28 August 2006 issue of Chemical Market Reporter (ICIS) in USD/gal (conversion 3.7854 litre/gal; density 0.6548 kg/litre)
  properties: EcoSpold01Allocation_undefined_1 100, EcoSpold01Allocation_undefined_10 15.01, EcoSpold01Allocation_undefined_11 15.01, EcoSpold01Allocation_undefined_12 15.01, EcoSpold01Allocation_undefined_13 15.01, EcoSpold01Allocation_undefined_14 15.01, EcoSpold01Allocation_undefined_15 15.01, EcoSpold01Allocation_undefined_16 15.01, EcoSpold01Allocation_undefined_17 15.01, EcoSpold01Allocation_undefined_18 15.01, EcoSpold01Allocation_undefined_2 15.01, EcoSpold01Allocation_undefined_28 15.009, EcoSpold01Allocation_undefined_29 15.009, EcoSpold01Allocation_undefined_3 15.01, EcoSpold01Allocation_undefined_4 15.01, EcoSpold01Allocation_undefined_5 15.01, EcoSpold01Allocation_undefined_6 15.01, EcoSpold01Allocation_undefined_7 15.01, EcoSpold01Allocation_undefined_8 15.01, EcoSpold01Allocation_undefined_9 15.01, carbon allocation 0.837209 kg, carbon content 0.837209, carbon content, fossil 0.837209, carbon content, non-fossil 0, dry mass 1 kg, water content 0, water in wet mass 0 kg, wet mass 1 kg

## Inputs from technosphere
- 1,1-dimethylcyclopentane: -0.109748 kg; name BP_amount_6
  EcoSpold01Location=RER
  production volume
    Calculated from production volume of reference product using the relative outputs.
  properties: EcoSpold01Allocation_undefined_10 1.647, EcoSpold01Allocation_undefined_11 1.647, EcoSpold01Allocation_undefined_12 1.647, EcoSpold01Allocation_undefined_13 1.647, EcoSpold01Allocation_undefined_14 1.647, EcoSpold01Allocation_undefined_15 1.647, EcoSpold01Allocation_undefined_16 1.647, EcoSpold01Allocation_undefined_17 1.647, EcoSpold01Allocation_undefined_24 100, EcoSpold01Allocation_undefined_28 1.64701, EcoSpold01Allocation_undefined_29 1.64701, heating value, net 43.22 MJ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
- 2,3-dimethylbutan: -0.0665616 kg; name BP_amount_9
  EcoSpold01Location=RER
  production volume
    Calculated from production volume of reference product using the relative outputs.
  properties: EcoSpold01Allocation_undefined_10 0.999, EcoSpold01Allocation_undefined_11 0.999, EcoSpold01Allocation_undefined_12 0.999, EcoSpold01Allocation_undefined_13 0.999, EcoSpold01Allocation_undefined_14 0.999, EcoSpold01Allocation_undefined_15 0.999, EcoSpold01Allocation_undefined_21 100, EcoSpold01Allocation_undefined_28 0.999022, EcoSpold01Allocation_undefined_29 0.999022, dry mass 1 kg, heating value, net 45.02 MJ, wet mass 1 kg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
- 2-methylpentane: -0.327529 kg; name BP_amount_8
  EcoSpold01Location=RER
  production volume
    Calculated from production volume of reference product using the relative outputs.
  properties: EcoSpold01Allocation_undefined_10 4.916, EcoSpold01Allocation_undefined_11 4.916, EcoSpold01Allocation_undefined_12 4.916, EcoSpold01Allocation_undefined_13 4.916, EcoSpold01Allocation_undefined_14 4.916, EcoSpold01Allocation_undefined_15 4.916, EcoSpold01Allocation_undefined_16 4.916, EcoSpold01Allocation_undefined_17 4.916, EcoSpold01Allocation_undefined_22 100, EcoSpold01Allocation_undefined_28 4.91608, EcoSpold01Allocation_undefined_29 4.91608, heating value, net 45.02 MJ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
- chemical factory, organics: 2.74198e-9 unit; lognormal variance with pedigree 0.448, pedigree (4,5,5,5,5)
  Estimation
  EcoSpold01Location=RER
  Uncertainty: Estimation
- electricity, medium voltage: 0.172397 kWh; lognormal variance with pedigree 0.0408, pedigree (2,2,5,3,1)
  EcoSpold01Location=UCTE
  Overcash 1998 - 2004
  Uncertainty: Overcash 1998 - 2004
- fraction 1 from naphtha separation: -0.0975459 kg; name BP_amount_1
  EcoSpold01Location=RER
  production volume
    Calculated from production volume of reference product using the relative outputs.
  properties: EcoSpold01Allocation_undefined_10 1.464, EcoSpold01Allocation_undefined_11 1.464, EcoSpold01Allocation_undefined_12 1.464, EcoSpold01Allocation_undefined_13 1.464, EcoSpold01Allocation_undefined_14 1.464, EcoSpold01Allocation_undefined_15 1.464, EcoSpold01Allocation_undefined_16 1.464, EcoSpold01Allocation_undefined_17 1.464, EcoSpold01Allocation_undefined_20 100, EcoSpold01Allocation_undefined_28 1.46401, EcoSpold01Allocation_undefined_29 1.46401, heating value, net 45 MJ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
- fraction 7 from naphtha separation: -0.578284 kg; name BP_amount_5
  EcoSpold01Location=RER
  production volume
    Calculated from production volume of reference product using the relative outputs.
  properties: EcoSpold01Allocation_undefined_10 8.678, EcoSpold01Allocation_undefined_11 8.678, EcoSpold01Allocation_undefined_12 8.678, EcoSpold01Allocation_undefined_13 8.678, EcoSpold01Allocation_undefined_14 8.678, EcoSpold01Allocation_undefined_15 8.678, EcoSpold01Allocation_undefined_16 8.678, EcoSpold01Allocation_undefined_17 8.678, EcoSpold01Allocation_undefined_26 100, EcoSpold01Allocation_undefined_28 8.67812, EcoSpold01Allocation_undefined_29 8.67812, heating value, net 45 MJ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
- fraction 8 from naphtha separation: -1.96024 kg; name BP_amount_4
  EcoSpold01Location=RER
  production volume
    Calculated from production volume of reference product using the relative outputs.
  properties: EcoSpold01Allocation_undefined_10 29.42, EcoSpold01Allocation_undefined_11 29.42, EcoSpold01Allocation_undefined_12 29.42, EcoSpold01Allocation_undefined_13 29.42, EcoSpold01Allocation_undefined_14 29.42, EcoSpold01Allocation_undefined_15 29.42, EcoSpold01Allocation_undefined_16 29.42, EcoSpold01Allocation_undefined_17 29.42, EcoSpold01Allocation_undefined_18 29.42, EcoSpold01Allocation_undefined_2 29.42, EcoSpold01Allocation_undefined_27 100, heating value, net 45 MJ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
- heat, district or industrial, natural gas: 16.2091 MJ; lognormal variance with pedigree 0.0408, pedigree (2,2,5,3,1)
  Uncertainty: Overcash 1998 - 2004
  properties: heating value, net 1 MJ
- heat, district or industrial, other than natural gas: 9.04725 MJ; lognormal variance with pedigree 0.0408, pedigree (2,2,5,3,1)
  Uncertainty: Overcash 1998 - 2004
  properties: heating value, net 1 MJ
- heptane: -0.974911 kg; name BP_amount_3
  production volume
    Calculated from production volume of reference product using the relative outputs.
  properties: EcoSpold01Allocation_undefined_10 14.63, EcoSpold01Allocation_undefined_11 14.63, EcoSpold01Allocation_undefined_12 14.63, EcoSpold01Allocation_undefined_13 14.63, EcoSpold01Allocation_undefined_14 14.63, EcoSpold01Allocation_undefined_15 14.63, EcoSpold01Allocation_undefined_16 14.63, EcoSpold01Allocation_undefined_17 14.63, EcoSpold01Allocation_undefined_19 100, EcoSpold01Allocation_undefined_28 14.6319, EcoSpold01Allocation_undefined_29 14.6319, heating value, net 44.77 MJ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
- methylcyclohexane: -1.14875 kg; name BP_amount_2
  EcoSpold01Location=RER
  production volume
    Calculated from production volume of reference product using the relative outputs.
  properties: EcoSpold01Allocation_undefined_10 17.24, EcoSpold01Allocation_undefined_11 17.24, EcoSpold01Allocation_undefined_12 17.24, EcoSpold01Allocation_undefined_13 17.24, EcoSpold01Allocation_undefined_14 17.24, EcoSpold01Allocation_undefined_15 17.24, EcoSpold01Allocation_undefined_16 17.24, EcoSpold01Allocation_undefined_17 17.24, EcoSpold01Allocation_undefined_25 100, EcoSpold01Allocation_undefined_28 17.241, EcoSpold01Allocation_undefined_29 17.241, heating value, net 43.22 MJ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
- methylcyclopentane: -0.399438 kg; name BP_amount_7
  EcoSpold01Location=RER
  production volume
    Calculated from production volume of reference product using the relative outputs.
  properties: EcoSpold01Allocation_undefined_10 5.995, EcoSpold01Allocation_undefined_11 5.995, EcoSpold01Allocation_undefined_12 5.995, EcoSpold01Allocation_undefined_13 5.995, EcoSpold01Allocation_undefined_14 5.995, EcoSpold01Allocation_undefined_15 5.995, EcoSpold01Allocation_undefined_16 5.995, EcoSpold01Allocation_undefined_17 5.995, EcoSpold01Allocation_undefined_18 5.995, EcoSpold01Allocation_undefined_2 5.995, EcoSpold01Allocation_undefined_23 100, heating value, net 43.22 MJ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
- naphtha: 6.85495 kg; lognormal variance with pedigree 0.0408, pedigree (2,2,5,3,1)
  EcoSpold01Location=RER
  Overcash 1998 - 2004
  Uncertainty: Overcash 1998 - 2004
  properties: carbon content, fossil 0.919743, dry mass 1 kg, heating value, net 45 MJ, wet mass 1 kg
  note on carbon content, fossil: C-content was calculated using data from Tab 3.20, ecoinvent v2.2 report 6_IV CO2 emmissions and High heating value.

## Inputs from nature
- Water, cooling, unspecified natural origin [natural resource, in water]: 0.172471 m3; name water_cooling_UNO_input; lognormal variance with pedigree 0.0408, pedigree (2,2,5,3,1)
  Overcash 1998 - 2004
  Uncertainty: Overcash 1998 - 2004

## Emissions to nature
- Carbon dioxide, fossil [air, urban air close to ground]: 0.379764 kg; lognormal variance with pedigree 0.0582, pedigree (4,2,5,3,1)
  Estimation
  Uncertainty: Estimation
- Heptane [air, urban air close to ground]: 0.013799 kg; lognormal variance with pedigree 0.0808, pedigree (2,2,5,3,1)
  Overcash 1998 - 2004
  Uncertainty: Overcash 1998 - 2004
- Hexane [air, urban air close to ground]: 0.0115163 kg; lognormal variance with pedigree 0.0808, pedigree (2,2,5,3,1)
  Overcash 1998 - 2004
  Uncertainty: Overcash 1998 - 2004
- Hydrocarbons, aliphatic, alkanes, cyclic [air, urban air close to ground]: 0.070606 kg; lognormal variance with pedigree 0.0808, pedigree (2,2,5,3,1)
  Overcash 1998 - 2004
  Uncertainty: Overcash 1998 - 2004
- Water [air, unspecified]: 0.0668323 m3; name water_to_air_unspecified; = (water_cooling_UNO_input*fraction_CW_to_air); lognormal variance with pedigree 0.0807, pedigree (2,2,5,1,1)
  Calculated value based on literature values and expert opinion. See comments in the parametres' comment field.
  property fraction, origin: fresh water 0; name fraction_origin_fresh_water
  property fraction, origin: salt water 0; name fraction_origin_salt_water
  property fraction, origin: unspecified 1; name fraction_origin_unspecified
- BOD5, Biological Oxygen Demand [water, surface water]: 0.129833 kg; lognormal variance with pedigree 0.0808, pedigree (2,2,5,3,1)
  Calculated from water emissions
  Uncertainty: Calculated from water emissions
- COD, Chemical Oxygen Demand [water, surface water]: 0.0324925 kg; lognormal variance with pedigree 0.0808, pedigree (2,2,5,3,1)
  Calculated from water emissions
  Uncertainty: Calculated from water emissions
- DOC, Dissolved Organic Carbon [water, surface water]: 0.129833 kg; lognormal variance with pedigree 0.0808, pedigree (2,2,5,3,1)
  Calculated from water emissions
  Uncertainty: Calculated from water emissions
- Hydrocarbons, unspecified [water, surface water]: 0.00959693 kg; lognormal variance with pedigree 0.0808, pedigree (2,2,5,3,1)
  Overcash 1998 - 2004
  Uncertainty: Overcash 1998 - 2004
- TOC, Total Organic Carbon [water, surface water]: 0.0324925 kg; lognormal variance with pedigree 0.0808, pedigree (2,2,5,3,1)
  Calculated from water emissions
  Uncertainty: Calculated from water emissions
- Water [water, unspecified]: 0.105638 m3; name water_to_water_unspecified; = water_cooling_UNO_input*(1-fraction_CW_to_air); lognormal variance with pedigree 0.0807, pedigree (2,2,5,1,1)
  (same comment as for Water)
  property carbon content, fossil 0; name C_content_fossil
  property carbon content, non-fossil 0; name C_content_non_fossil
  property fraction, origin: fresh water 0; name fraction_origin_fresh_water_Ww
  property fraction, origin: salt water 0; name fraction_origin_salt_water_Ww
  property fraction, origin: unspecified 1; name fraction_origin_unspecified_Ww
  property water in wet mass 1000 kg; name WWM

## Sampling procedure
Literature data

## Extrapolations
Some data are derived from other or unknown plants or have been estimated.

## Review by Niels Jungbluth 2005-12-19
Passed.

## Review by Emilia Moreno Ruiz 2012-03-19
heptane moved from reference product to by-product
