# aluminium oxide production

Dataset: EcoSpold 2, unit process
Geography: IAI Area, Asia, without China and GCC
Time period: 2015-01-01 to 2022-12-31
Technology level: current
Classification: EcoSpold01Categories: chemicals/inorganics
Classification: ISIC rev.4 ecoinvent: 2420:Manufacture of basic precious and other non-ferrous metals
Synonyms: Corundum; alumina; Tonerde; Korund
Scenario: Business-as-Usual
System model: Substitution, consequential, long-term
Generated by: Linlin Wu
Published in: International Aluminium Insitute 2015
Database: ecoinvent
isCopyrightProtected: false

## General comment
Data on Al(OH)3 extraction and calcination to Al2O3 was aggregated on original source (IAI 2015, IAI personnal communication 2017). In- and outputs of AL(OH)3 are calculated according to the stoichiometry (1.530 kg Al(OH)3 --> 1.000 kg Al2O3 + 0.530 kg H2O). Separate energy data was provided by IAI for production of hydrate and calcination processes.
Two sources were used in the creation of this dataset: IAI 2015 Survey data; and original ecoinvent 2 data (Althaus, 2007) for flows unreported by IAI.
As reported by the IAI: "Total alumina production is the quantity of aluminium oxide trihydrate produced in a defined period and expressed as 100%, nominal aluminium oxide (Al2O3) equivalent, irrespective of further processing. Total alumina production figures have two components, that to be used for the production of aluminium (metallurgical grade alumina) and that to be used for any other purpose (chemical grade alumina)." (IAIA, 2019, ALUMINA PRODUCTION. Retrieved from: http://www.world-aluminium.org/statistics/alumina-production/, accesseed 11 Feb 2019).

## Included activities start
Unit process starts with the receiving of the aluminium hydroxide, produced onsite.

## Included activities end
Includes calcination of Al(OH)3 to Al2O3 and it's infrastructure. No transports are included because Al2O3 is produced in the same plant as Al(OH)3.

## Geography
While IAI data are global in scope, flows not reported by IAI and taken from anterior ecoinvent v2 dataset are based on European data.

## Technology
Average technology for the aluminium produced globally.

## Reference product
- aluminium oxide, metallurgical: 1 kg; name Al2O3_metall; By-product classification allocatable product; CPC 41432: Alumina (aluminium oxide), except artificial corundum; CAS 1344-28-1
  production volume 5.478e9 kg
    Data taken from IAI Statistics (IAI + CNIA) for the year 2015
  property price 0.28 EUR2005
    From UN trade database. http://data.un.org/ Import data from the largest economies of the world are used (Brazil, India, USA, China, Japan and EU-27).
  properties: carbon allocation 0 kg, carbon content 0, carbon content, fossil 0, carbon content, non-fossil 0, dry mass 1 kg, water content 0, water in wet mass 0 kg, wet mass 1 kg

## Inputs from technosphere
- aluminium hydroxide: 1.73864 kg; lognormal variance with pedigree 0.016, pedigree (4,1,3,1,1)
  EcoSpold01Location=RER
  Stoichiometric relation
  Uncertainty: Stochiometric relation.
  properties: dry mass 1 kg, wet mass 1 kg
- aluminium oxide factory: 2.84091e-11 unit; source Classen M. 2009; lognormal variance with pedigree 0.5, pedigree (5,5,5,5,5)
  Rough guess
  EcoSpold01Location=RER
  Uncertainty: rough guess
- aluminium oxide, non-metallurgical: -0.136364 kg; name Al2O3_non_metall
  Share of metallurgical vs non-metallurgical aluminium oxide from IAI http://www.world-aluminium.org/statistics/alumina-production/#data for the year 2015.
  production volume
    Calculated from production volume of reference product using the relative outputs.
  properties: dry mass 1 kg, price 0.28 EUR2005, wet mass 1 kg
- electricity, medium voltage: 0.00147037, 0.00213137, 0.000168159, 0.000151534, 0.00246055, 0.00224785, 0.0164173, 0.000901656, 0.000187619 kWh (9 suppliers, which the file names only by identifier); sum of these 0.0261364 kWh; source International Aluminium Insitute 2015; lognormal variance with pedigree 0.0027, pedigree (1,2,3,1,1)
  As reported by IAI energy survey (2015)
- heat, district or industrial, natural gas: 2.03059 MJ; = Net_Heat_Value_ng*40.4 *m3fuel_use_ng /fuel_use_ng; source International Aluminium Insitute 2015; lognormal variance with pedigree 0.0033, pedigree (2,2,3,1,1)
  As reported by IAI 2015 Energy survey
  property Corresponding fuel use 1.04 MJ; name fuel_use_ng
  property fuel input in physical units, m3 0.046 m3; name m3fuel_use_ng
  property heating value, net 1 MJ; name Net_Heat_Value_ng
  note on Corresponding fuel use: Lower heating value of the fuel input related to the heat/electricity output, based on an efficiency of 96%
- heat, district or industrial, other than natural gas: 1.98567 MJ; = kgFuel_Input_HFO* Net_Heat_Value_HFO*40.0/ fuel_use_HFO; source International Aluminium Insitute 2015; lognormal variance with pedigree 0.0033, pedigree (2,2,3,1,1)
  As reported by IAI 2015 Energy survey
  property Corresponding fuel use 1.053 MJ; name fuel_use_HFO
  property fuel input in physical units, kg 0.046 kg; name kgFuel_Input_HFO
  property heating value, net 1 MJ; name Net_Heat_Value_HFO
  note on Corresponding fuel use: Lower heating value of the fuel input related to the heat/electricity output. Based on an assumed efficiency of 95%.
- heat, district or industrial, other than natural gas: 2.1197 MJ; = kgFuel_Input_LFO* Net_Heat_Value_LFO*42.7/ fuel_use_LFO; source International Aluminium Insitute 2015; lognormal variance with pedigree 0.0033, pedigree (2,2,3,1,1)
  Diesel combustion. As reported by IAI 2015 energy survey
  property Corresponding fuel use 1.053 MJ; name fuel_use_LFO
  property fuel input in physical units, kg 0.046 kg; name kgFuel_Input_LFO
  property heating value, net 1 MJ; name Net_Heat_Value_LFO
- heat, district or industrial, other than natural gas: 1.20855 MJ; = Net_Heat_Value_Coal*28.9 * kgFuel_Input_Coal / fuel_use_Coal; source International Aluminium Insitute 2015; lognormal variance with pedigree 0.0033, pedigree (2,2,3,1,1)
  As reported by IAI 2015 Energy survey
  property Corresponding fuel use 1.25 MJ; name fuel_use_Coal
  property fuel input in physical units, kg 0.046 kg; name kgFuel_Input_Coal
  property heating value, net 1 MJ; name Net_Heat_Value_Coal
  note on Corresponding fuel use: Lower heating value of the fuel input related to the heat/electricity output

## Sampling procedure
2015 LCI Survey Data was collected by the IAI in Feb - July 2016 with analysis and data verification taking place Aug - Dec 2016.

## Extrapolations
Flows are based on a life cycle inventory survey carried out by IAI for its member and non-member companies, except energy related data that are supplied from IAI annual energy surveys (electricity, fuel inputs).No data obtained from the IAI 2015 Life Cycle Survey from this region. Global averages are adopted here. Amounts based on IAI 2015 Energy Survey actually cover about 85% of regional production, although again not all sites reported all flows.
