# treatment of waste paint, hazardous waste incineration, with energy recovery

Dataset: EcoSpold 2, unit process
Geography: RoW
Time period: 1997-01-01 to 2022-12-31
Technology level: current
Classification: ISIC rev.4 ecoinvent: 3822:Treatment and disposal of hazardous waste
Tags: Treatment
Scenario: Business-as-Usual
System model: Substitution, consequential, long-term
Share of production covered: 39 %
Generated by: Gabor Doka
Published in: Doka G. 2008
Database: ecoinvent
isCopyrightProtected: true

## General comment
Inventoried waste contains 100% paint (remains); . waste composition (wet, in ppm): upper heating value 10.86 MJ/kg; lower heating value 10.14 MJ/kg; H2O n.a.; O 290300; H 36288; C 651510; S n.a.; N n.a.; P n.a.; B n.a.; Cl 1600; Br n.a.; F n.a.; I n.a.; Ag n.a.; As 2.5; Ba n.a.; Cd 5.0622; Co 388.23; Cr 1040.7; Cu 59; Hg 0.6; Mn n.a.; Mo 38.619; Ni 15; Pb 15246; Sb n.a.; Se n.a.; Sn 256.78; V n.a.; Zn 3251.5; Be n.a.; Sc n.a.; Sr n.a.; Ti n.a.; Tl n.a.; W n.a.; Si n.a.; Fe n.a.; Ca n.a.; Al n.a.; K n.a.; Mg n.a.; Na n.a.; Share of carbon in waste that is biogenic 0%. Net energy produced in HWI: 17.11MJ/kg thermal energy and 1.27MJ/kg electric energy. Allocation of energy production: no substitution or expansion. 100% of burden allocated to waste disposal function of HWI. One kg of this waste produces 0.02958 kg of residues, which are landfilled. Additional solidification with 0.01183 kg of cement.

## Included activities end
waste-specific air and water emissions from incineration, auxiliary material consumption for flue gas cleaning. Short-term emissions to river water and long-term emissions to ground water from residual material landfill (from solidified fly ashes and scrubber slugde). Process energy demands for HWI.

## Geography
Specific to the technology encountered in Switzerland in 2000. Well applicable to modern incineration practices in Europe or North America or Japan.

## Technology
Swiss HWI plant in 2000 with wet flue gas scrubber and low-dust SCR DeNOx facility. Gross thermal efficiency 74.4% and gross electric efficiency 10%.

## Time period
Transfer coefficients for modern Swiss MSWI. Emission speciation based on early 90ies data.

## Reference product
- waste paint: -1 kg; name RP; By-product classification Waste; CPC 39: Wastes or scraps
  production volume 7.31832e8 kg
    Estimated value. Global demand of paint is estimated to be 45600000000kg (http://www.freedoniagroup.com/brochure/28xx/2845smwe.pdf, accessed 20151009) of which 55% is paint and 35% is emulsion paint (http://www.psgdover.com/en/mouvex-paint-coatings-market-overview/what-are-paint-a-coatings/defining-paintaccessed, accessed 20151009). 22% is considered hazardous waste and 78% non hazardous waste (http://archive.epa.gov/sectors/web/pdf/paint_quantity_report.pdf, accessed 20151009). In the US, of hazardous waste 7.2% is sent to hazardous incineration (http://www3.epa.gov/epawaste/hazard/tsd/td/combustion.htm, accessed 20151009). Of non hazardous waste 12% is sent to incineration (Extrapolated from the US data, according to GDP. The relative GDP of US in 2005 was .274857, compared to the global value of 1. EPA estimates that 12% of annual MSW in US is incinerated for energy recovery http://www.epa.gov/epawaste/nonhaz/municipal/pubs/2012_msw_fs.pdf) 23% is sent to inert material landfill (http://archive.epa.gov/sectors/web/pdf/paint_quantity_report.pdf, accessed 20151009). The rest (65%) is considered to go to sanitary landfill. In the EU (from Eurostat municipal waste treatment http://ec.europa.eu/eurostat/web/waste/transboundary-waste-shipments/key-waste-streams/municipal-waste), of hazardous waste 23% is sent to hazardous incineration. Of non hazardous waste 23% is sent to incineration. 37% is considered to be sent to landfilling and it is split between sanitary and inert landfill using the same shares assumed for the US. The treatment activities for the global dataset are calculated as the weighted average of US and EU, based on nominal GDP of 2010 (source: United Nations, http://data.un.org/Glossary.aspx?q=GDP+%28current+US%24%29, accessed 20130726 and 20130312). Where EU without CH GDP is 2.80E-01 and US is 0.253094 of the world. Gross domestic product (GDP) at current prices is GDP at prices of the current reporting period. Also known as nominal GDP. The assumed treatment are 16% of hazardous waste goes to incineration. For non hazardous, 20% goes to incineration, 12% goes to inert landfill, and 56% goes to sanitary landfill.
  property carbon content, fossil 0.65
    Tab A.5, ecoinvent v2.2 report 13_I. C content has been calculated after data in the tables, and then referred to 1 kg DM
  property heating value, net 19.7 MJ
    LHV is calculated based on the Carbon content of the product. More details can be found on the respective documentation.
  property price 0 EUR2005
    Waste products are assigned a price of zero as they are assumed to require further treatment.
  properties: carbon allocation 0.65 kg, carbon content 0.65, carbon content, non-fossil 0, dry mass 1 kg, water content 0, water in wet mass 0 kg, wet mass 1 kg

## Inputs from technosphere
- cement, unspecified: 0.00016365, 0.000268543, 0.00101986, 1.26818e-5, 2.52052e-5, 3.85343e-5, 0.0102705, 3.20122e-5 kg (8 suppliers, which the file names only by identifier); sum of these 0.011831 kg; lognormal variance with pedigree 0.162, pedigree (1,1,5,5,1)
  Cement for solidification of landfilled residual material. Uncertainty calculated from unertainty of the waste composition of this waste, of transfer coefficients in the incinerator and of the solidification recipe.
  properties: dry mass 1 kg, wet mass 1 kg
- chemical, inorganic: 0.00016883 kg; lognormal variance with pedigree 0.142, pedigree (1,1,5,5,1)
  Proxy for Polyelectrolyte. uncertainty calculated from uncertainty in average auxiliary material input, and the unertainty of the waste composition of this waste
  properties: carbon content, fossil 0.003, dry mass 1 kg, wet mass 1 kg
  note on carbon content, fossil: This dataset is an unweighted average of 20 inorganic substances (listed in Tab 88.1, ecoinvent v2.2 report 8, part II), being part of the top100 chemicals included in this database. The C-content has also been calculated as an unweighted average of the C content of the substances composing this dataset.
- chemical, organic: 3.4203e-5 kg; lognormal variance with pedigree 1.352, pedigree (1,1,5,5,1)
  Proxy for TMT15. uncertainty calculated from uncertainty in average auxiliary material input, and the unertainty of the waste composition of this waste
  properties: carbon content, fossil 0.628, dry mass 1 kg, heating value, net 19.03 MJ, wet mass 1 kg
  note on carbon content, fossil: This dataset is an unweighted average of 20 organic substances (listed in Tab 88.1, ecoinvent v2.2 report 8, part II), being part of the top100 chemicals included in this database. The C-content has also been calculated as an unweighted average of the C content of the substances composing this dataset.
- electricity, medium voltage: -0.0336191, -0.0232909, -0.00124838, -0.27738, -0.00125786, -0.0159816 kWh (6 suppliers, which the file names only by identifier); sum of these -0.352778 kWh; lognormal variance with pedigree 0.122, pedigree (1,1,1,5,1)
  production volume
    Calculated based on the production volume of the reference product.
  properties: price 0.1 EUR2005
- hazardous waste incineration facility: 1.25e-9 unit; lognormal variance with pedigree 0.042, pedigree (1,1,5,5,1)
  demands per kilogram waste. uncertainty is heeded in the module
- heat, central or small-scale, other than natural gas: 12.0884 MJ; lognormal variance with pedigree 0.152, pedigree (1,1,5,5,1)
  Uncertainty dependent on total energy required and heating value present, using experimental GSd for substraction from uc=A*GSDa^2-B
  properties: heating value, net 1 MJ
- heat, district or industrial, other than natural gas: -17.0802, -0.029825 MJ (2 suppliers, which the file names only by identifier); sum of these -17.11 MJ; lognormal variance with pedigree 0.122, pedigree (1,1,1,5,1)
  production volume
    Calculated based on the production volume of the reference product.
  properties: heating value, net 1 MJ, price 0.0106 EUR2005
- hydrochloric acid, without water, in 30% solution state: 0.0001013 kg; lognormal variance with pedigree 0.142, pedigree (1,1,5,5,1)
  uncertainty calculated from uncertainty in average auxiliary material input, and the unertainty of the waste composition of this waste
  properties: dry mass 1 kg, heating value, net 3.32 MJ, wet mass 1 kg
- iron (III) chloride, without water, in 40% solution state: 0.011769 kg; lognormal variance with pedigree 0.292, pedigree (1,1,5,5,1)
  (same comment as for hydrochloric acid, without water, in 30% solution state)
  properties: dry mass 1 kg, wet mass 1 kg
- process-specific burdens, hazardous waste incineration plant: 1 kg; lognormal variance with pedigree 0.042, pedigree (1,1,5,5,1)
  demands per kilogram waste. uncertainty is heeded in the module
- process-specific burdens, residual material landfill: 0.029577 kg; lognormal variance with pedigree 0.152, pedigree (1,1,5,5,1)
  uncertainty is calculated from uncertainties in waste composition and transfer coefficients in incinerator
- quicklime, milled, packed: 0.00013363 kg; lognormal variance with pedigree 0.692, pedigree (1,1,5,5,1)
  (same comment as for hydrochloric acid, without water, in 30% solution state)
  properties: dry mass 0.99 kg, water content 0.010101, wet mass 1 kg
- residual material landfill: 6.1618e-11 unit; lognormal variance with pedigree 0.152, pedigree (1,1,5,5,1)
  (same comment as for process-specific burdens, residual material landfill)
- sodium hydroxide, without water, in 50% solution state: 0.0016997 kg; lognormal variance with pedigree 0.692, pedigree (1,1,5,5,1)
  (same comment as for hydrochloric acid, without water, in 30% solution state)
  properties: dry mass 1 kg, heating value, net 3.03 MJ, wet mass 1 kg
- waste cement, hydrated: -0.029577 kg; name BP1; lognormal variance with pedigree 0.122, pedigree (1,1,1,5,1)
  Hydrated cement for solidification of landfilled residual material. Uncertainty calculated from unertainty of the waste composition of this waste and transfer coefficients in the incinerator and of the solidification recipe.
  production volume
    Calculated based on the relative production amount of the referenece and by product.
  properties: dry mass 1 kg, wet mass 1 kg

## Emissions to nature
- Arsenic ion [air, urban air close to ground]: 2.55e-14 kg; lognormal variance with pedigree 1.612, pedigree (1,1,5,5,1)
  (same comment as for process-specific burdens, residual material landfill)
- Cadmium II [air, urban air close to ground]: 2.7876e-10 kg; lognormal variance with pedigree 1.442, pedigree (1,1,5,5,1)
  (same comment as for process-specific burdens, residual material landfill)
- Carbon dioxide, fossil [air, urban air close to ground]: 2.3625 kg; lognormal variance with pedigree 0.052, pedigree (1,1,5,5,1)
  calculated from uncertainty in carbon in waste and transfer coefficients
- Carbon monoxide, fossil [air, urban air close to ground]: 1.2076e-5 kg; lognormal variance with pedigree 0.712, pedigree (1,4,5,5,3)
  1 plant for waste solvent incineration in Switzerland
  Uncertainty: & basic uncertainty of 5; 1 plant for waste solvent incineration in Switzerland
- Chromium III [air, urban air close to ground]: 7.6953e-11 kg; lognormal variance with pedigree 0.792, pedigree (1,1,5,5,1)
  (same comment as for process-specific burdens, residual material landfill)
- Cobalt II [air, urban air close to ground]: 2.7176e-7 kg; lognormal variance with pedigree 0.842, pedigree (1,1,5,5,1)
  (same comment as for process-specific burdens, residual material landfill)
- Copper ion [air, urban air close to ground]: 4.13e-8 kg; lognormal variance with pedigree 1.092, pedigree (1,1,5,5,1)
  (same comment as for process-specific burdens, residual material landfill)
- Hydrochloric acid [air, urban air close to ground]: 4.9354e-7 kg; lognormal variance with pedigree 0.662, pedigree (1,1,5,5,1)
  (same comment as for process-specific burdens, residual material landfill)
- Lead II [air, urban air close to ground]: 5.6593e-7 kg; lognormal variance with pedigree 0.402, pedigree (1,1,5,5,1)
  (same comment as for process-specific burdens, residual material landfill)
- Mercury II [air, urban air close to ground]: 2.0722e-14 kg; lognormal variance with pedigree 1.782, pedigree (1,1,5,5,1)
  (same comment as for process-specific burdens, residual material landfill)
- Molybdenum VI [air, urban air close to ground]: 7.7239e-8 kg; lognormal variance with pedigree 1.152, pedigree (1,1,5,5,1)
  (same comment as for process-specific burdens, residual material landfill)
- Nickel II [air, urban air close to ground]: 1.05e-8 kg; lognormal variance with pedigree 1.282, pedigree (1,1,5,5,1)
  (same comment as for process-specific burdens, residual material landfill)
- Tin ion [air, urban air close to ground]: 3.4063e-7 kg; lognormal variance with pedigree 0.902, pedigree (1,1,5,5,1)
  (same comment as for process-specific burdens, residual material landfill)
- Zinc II [air, urban air close to ground]: 2.276e-6 kg; lognormal variance with pedigree 0.572, pedigree (1,1,5,5,1)
  (same comment as for process-specific burdens, residual material landfill)
- Arsenic ion [water, ground-, long-term]: 2.4997e-15 kg; lognormal variance with pedigree 1.512, pedigree (1,1,5,5,1)
  Long-term emissions from landfilling of incineration residues. uncertainty is calculated from uncertainties in waste composition and transfer coefficients in incinerator and landfills.
- Arsenic ion [water, surface water]: 2.5e-6 kg; lognormal variance with pedigree 1.492, pedigree (1,1,5,5,1)
  uncertainty is calculated from uncertainties in waste composition and transfer coefficients in incinerator and landfills
- BOD5, Biological Oxygen Demand [water, ground-, long-term]: 0.010585 kg; lognormal variance with pedigree 0.102, pedigree (1,1,5,5,1)
  (same comment as for Arsenic ion)
- BOD5, Biological Oxygen Demand [water, surface water]: 3.2737e-5 kg; lognormal variance with pedigree 0.352, pedigree (1,1,5,5,1)
  (same comment as for Arsenic ion)
- COD, Chemical Oxygen Demand [water, ground-, long-term]: 0.010585 kg; lognormal variance with pedigree 0.102, pedigree (1,1,5,5,1)
  (same comment as for Arsenic ion)
- COD, Chemical Oxygen Demand [water, surface water]: 3.2737e-5 kg; lognormal variance with pedigree 0.352, pedigree (1,1,5,5,1)
  (same comment as for Arsenic ion)
- Cadmium II [water, ground-, long-term]: 3.4349e-8 kg; lognormal variance with pedigree 7.632, pedigree (1,1,5,5,1)
  (same comment as for Arsenic ion)
- Cadmium II [water, surface water]: 2.2874e-9 kg; lognormal variance with pedigree 1.362, pedigree (1,1,5,5,1)
  (same comment as for Arsenic ion)
- Chloride [water, ground-, long-term]: 1.9421e-6 kg; lognormal variance with pedigree 0.662, pedigree (1,1,5,5,1)
  (same comment as for Arsenic ion)
- Chloride [water, surface water]: 0.0015976 kg; lognormal variance with pedigree 0.642, pedigree (1,1,5,5,1)
  (same comment as for Arsenic ion)
- Chromium VI [water, ground-, long-term]: 0.00019699 kg; lognormal variance with pedigree 0.702, pedigree (1,1,5,5,1)
  (same comment as for Arsenic ion)
- Chromium VI [water, surface water]: 6.5679e-5 kg; lognormal variance with pedigree 0.812, pedigree (1,1,5,5,1)
  (same comment as for Arsenic ion)
- Cobalt II [water, surface water]: 0.00038796 kg; lognormal variance with pedigree 0.822, pedigree (1,1,5,5,1)
  (same comment as for Arsenic ion)
- Copper ion [water, ground-, long-term]: 2.1722e-6 kg; lognormal variance with pedigree 3.722, pedigree (1,1,5,5,1)
  (same comment as for Arsenic ion)
- Copper ion [water, surface water]: 2.5347e-6 kg; lognormal variance with pedigree 1.072, pedigree (1,1,5,5,1)
  (same comment as for Arsenic ion)
- DOC, Dissolved Organic Carbon [water, ground-, long-term]: 0.004631 kg; lognormal variance with pedigree 0.102, pedigree (1,1,5,5,1)
  (same comment as for Arsenic ion)
- DOC, Dissolved Organic Carbon [water, surface water]: 1.4322e-5 kg; lognormal variance with pedigree 0.352, pedigree (1,1,5,5,1)
  (same comment as for Arsenic ion)
- Lead II [water, ground-, long-term]: 7.908e-5 kg; lognormal variance with pedigree 7.282, pedigree (1,1,5,5,1)
  (same comment as for Arsenic ion)
- Lead II [water, surface water]: 4.1498e-7 kg; lognormal variance with pedigree 0.722, pedigree (1,1,5,5,1)
  (same comment as for Arsenic ion)
- Mercury II [water, ground-, long-term]: 2.8025e-8 kg; lognormal variance with pedigree 4.012, pedigree (1,1,5,5,1)
  (same comment as for Arsenic ion)
- Mercury II [water, surface water]: 6.3263e-9 kg; lognormal variance with pedigree 1.672, pedigree (1,1,5,5,1)
  (same comment as for Arsenic ion)
- Molybdenum VI [water, ground-, long-term]: 1.7695e-7 kg; lognormal variance with pedigree 1.152, pedigree (1,1,5,5,1)
  (same comment as for Arsenic ion)
- Molybdenum VI [water, surface water]: 3.8365e-5 kg; lognormal variance with pedigree 1.132, pedigree (1,1,5,5,1)
  (same comment as for Arsenic ion)
- Nickel II [water, ground-, long-term]: 4.3162e-6 kg; lognormal variance with pedigree 1.512, pedigree (1,1,5,5,1)
  (same comment as for Arsenic ion)
- Nickel II [water, surface water]: 3.0747e-6 kg; lognormal variance with pedigree 1.252, pedigree (1,1,5,5,1)
  (same comment as for Arsenic ion)
- TOC, Total Organic Carbon [water, ground-, long-term]: 0.004631 kg; lognormal variance with pedigree 0.102, pedigree (1,1,5,5,1)
  (same comment as for Arsenic ion)
- TOC, Total Organic Carbon [water, surface water]: 1.4322e-5 kg; lognormal variance with pedigree 0.352, pedigree (1,1,5,5,1)
  (same comment as for Arsenic ion)
- Tin ion [water, ground-, long-term]: 4.8593e-6 kg; lognormal variance with pedigree 4.812, pedigree (1,1,5,5,1)
  (same comment as for Arsenic ion)
- Tin ion [water, surface water]: 1.1519e-8 kg; lognormal variance with pedigree 1.632, pedigree (1,1,5,5,1)
  (same comment as for Arsenic ion)
- Zinc II [water, ground-, long-term]: 3.9288e-5 kg; lognormal variance with pedigree 5.392, pedigree (1,1,5,5,1)
  (same comment as for Arsenic ion)
- Zinc II [water, surface water]: 4.3635e-5 kg; lognormal variance with pedigree 0.552, pedigree (1,1,5,5,1)
  (same comment as for Arsenic ion)

## Sampling procedure
The 2 Swiss HWI plants, used as the inventory reference technology mix, have a total annual capacity of 53'000 tons of hazardous waste. This corresponds to 39% of the Swiss total installed capacity in 2000. Swiss average plants size is 20'000 t/a.

## Extrapolations
Available waste composition data. Transfer coefficients from one modern HWI completed with data from MSWI. Waste-specific auxiliary material consumption adapted from MSWI. This dataset has been copied from an original dataset covering the geography CH. The uncertainty has been adjusted accordingly.
