# esterification of soybean oil

Dataset: EcoSpold 2, unit process
Geography: RoW
Time period: 2009-01-01 to 2022-12-31
Technology level: current
Classification: EcoSpold01Categories: biomass/fuels
Classification: ISIC rev.4 ecoinvent: 1920:Manufacture of refined petroleum products
Synonyms: soybean biodiesel production; methyl soyate production; biodiesel production
Scenario: Business-as-Usual
System model: Substitution, consequential, long-term
Share of production covered: 37 %
Generated by: Anne Greig
Published in: Omni Tech International 2010
Database: ecoinvent
isCopyrightProtected: true

## General comment
This dataset represents the production of soybean methyl ester, respectively glycerine, from crude soybean oil. Density of methyl ester = 0.88 kg/l
[This dataset is meant to replace the following datasets:
- esterification of soybean oil, GLO, 1996 - 2006]

## Included activities start
From reception of raw materials at the factory gate through esterification of crude soybean oil.

## Included activities end
The dataset includes intermediate storage of the oil and products. System boundary is at the esterification plant.

## Geography
Data collected from National Biodiesel Board (NBB) North American members.

## Technology
Typical vegetable oil esterification plant designed for the production of methyl ester (for use in the vehicle fuels market).

## Time period
Data for 2009; current technology for biodiesel plants.

## Parameters
- fraction, process water, to air: 0.15 dimensionless; name fraction_PW_to_air; lognormal variance with pedigree 0.092025, pedigree (4,4,3,2,4)
  Literature value. In case when no industry/process specific data are available, default evaporation fraction value is used. This value is 15% and is based on literature (Statistics Canada, 2007 & Shaffer, K.H., 2008, Consumptive water use in the Great Lakes Basin, USGS & Shiklomanov, 2003, World Water Resources at the Beginning of the 21st Century) and has been approved by an expert.
- fraction, tap water, to air: 0.15 dimensionless; name fraction_TW_to_air; = fraction_PW_to_air; lognormal variance with pedigree 0.092025, pedigree (4,4,3,2,4)
  Calculated value. See comment in the other parametres present in this dataset. Tap water is considered to be always used as process water, thus process water fractions to air are applied to all tap water input flows to calculate the amount of water consumed in the processes.

## Reference product
- fatty acid methyl ester: 1 kg; name ME; source Omni Tech International  2010; By-product classification allocatable product; CPC 35491: Biodiesel
  Soy biodiesel; produced from esterification of crude soybean oil. Note that The mass balance shows 93 grams more input than output (2.4%), which can be expected since the data were sampled separately. 3.35 kg/gal.
  production volume 6.639e9 kg
    Data from Lancellotti A, Mammana A, Lopez I. (2011). Biodiesel Demand Development: Challenges and Expectations in Brazil and Argentina. Frost & Sullivan Market Insight <www.frost.com/prod/servlet/market-insight-print.pag?docid=224129356>
  property heating value, net 37.2 MJ
    Based on literature, report 17, page 439. Jungbluth, N., Chudacoff, M., Dauriat, A., Dinkel, F., Doka, G., Faist Emmenegger, M., Gnansounou, E., Kljun, N., Schleiss, K., Spielmann, M., Stettler, C., Sutter, J. 2007: Life Cycle Inventories of Bioenergy. ecoinvent report No. 17, Swiss Centre for Life Cycle Inventories, Dübendorf, CH.
  property price 0.817 EUR2005
    Temporary price data. Calculated as 90% of purchasers price based on: 2004 import and export prices (total trades (USD) divided by total weight (kg) in EU27, USA, China, Japan and India) from UN Commodity Trade Statistics Database (http://data.un.org/Explorer.aspxDatabase [Accessed 2 July 2010]). Commodity: 'Veg fats, oils or fractions hydrogenated, esterified'.
  properties: carbon allocation 0.773 kg, carbon content 0.773, carbon content, fossil 0.041, carbon content, non-fossil 0.732, dry mass 1 kg, water content 0, water in wet mass 0 kg, wet mass 1 kg

## Inputs from technosphere
- citric acid: 0.00072952 kg; source Omni Tech International  2010; lognormal variance with pedigree 0.0418, pedigree (2,3,5,1,1)
  Measured value
  properties: carbon content, fossil 0.375099, dry mass 1 kg, heating value, net 16.41 MJ, wet mass 1 kg
  note on carbon content, fossil: Calculated based on molecular structure. See tab "chemicals".
- electricity, medium voltage: 1.73572e-5, 6.3838e-5, 2.63497e-5, 0.000721161, 0.00050127, 9.27567e-5, 0.000150076, 4.21462e-5, 6.25933e-6, 2.39199e-5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 kWh (30 suppliers, which the file names only by identifier); sum of these 0.0357462 kWh; source Omni Tech International  2010; lognormal variance with pedigree 0.0418, pedigree (2,3,5,1,1)
  Measured value
- glycerine: -0.0800004, -0.0400002 kg (2 suppliers, which the file names only by identifier); sum of these -0.120001 kg; = 0.8881*0.4536; source Omni Tech International  2010
  EcoSpold01Location=US
  Measured value. Conversion made from lb to kg.
  production volume
    Calculated relative to GLO output of methyl ester (0.1199 kg / kg ME)
  properties: carbon content, non-fossil 0.391304, dry mass 1 kg, heating value, net 18 MJ, price 0.792 EUR2005, wet mass 1 kg
  note on heating value, net: Based on literature, Report 17: Jungbluth, N., Chudacoff, M., Dauriat, A., Dinkel, F., Doka, G., Faist Emmenegger, M., Gnansounou, E., Kljun, N., Schleiss, K., Spielmann, M., Stettler, C., Sutter, J. 2007: Life Cycle Inventories of Bioenergy. ecoinvent report No. 17, Swiss Centre for Life Cycle Inventories, Dübendorf, CH.
- heat, district or industrial, natural gas: 0.289541 MJ; = 2.916*0.33333; source Omni Tech International  2010; lognormal variance with pedigree 0.0418, pedigree (2,3,5,1,1)
  Measured value. The proportion of gas to other fuel sources comes from EcoInvent data quality guidance.
  properties: heating value, net 1 MJ
- heat, district or industrial, other than natural gas: 0.579083 MJ; = 2.916*0.66666; source Omni Tech International  2010; lognormal variance with pedigree 0.0424, pedigree (2,3,5,4,1)
  Measured value, from original data source. Original data source had this all as natural gas heat. But since we don't know the heat sources globally for this operation, 2/3 has been allocated to "other sources" per EcoInvent guidelines.
  properties: heating value, net 1 MJ
- hydrochloric acid, without water, in 30% solution state: 0.0075571, 0.0358745 kg (2 suppliers, which the file names only by identifier); sum of these 0.0434316 kg; source Omni Tech International  2010; lognormal variance with pedigree 0.0418, pedigree (2,3,5,1,1)
  Measured value
  properties: dry mass 1 kg, heating value, net 3.32 MJ, wet mass 1 kg
- methanol: 0.0910039 kg; source Omni Tech International  2010; lognormal variance with pedigree 0.0418, pedigree (2,3,5,1,1)
  Measured value
  properties: carbon content, fossil 0.375, dry mass 1 kg, heating value, net 20 MJ, wet mass 1 kg
  note on heating value, net: Based on literature, page 533, Report 17: Jungbluth, N., Chudacoff, M., Dauriat, A., Dinkel, F., Doka, G., Faist Emmenegger, M., Gnansounou, E., Kljun, N., Schleiss, K., Spielmann, M., Stettler, C., Sutter, J. 2007: Life Cycle Inventories of Bioenergy. ecoinvent report No. 17, Swiss Centre for Life Cycle Inventories, Dübendorf, CH.
- phosphoric acid, industrial grade, without water, in 85% solution state: 0.000635091 kg; source Omni Tech International  2010; lognormal variance with pedigree 0.0418, pedigree (2,3,5,1,1)
  Measured value
  properties: dry mass 1 kg, wet mass 1 kg
- sodium hydroxide, without water, in 50% solution state: 0.000972892 kg; source Omni Tech International  2010; lognormal variance with pedigree 0.0418, pedigree (2,3,5,1,1)
  Measured value.
  properties: dry mass 1 kg, heating value, net 3.03 MJ, wet mass 1 kg
- sodium methoxide: 0.0231338 kg; source Omni Tech International  2010; lognormal variance with pedigree 0.0418, pedigree (2,3,5,1,1)
  Measured value
  properties: carbon content, fossil 0.222222, dry mass 1 kg, heating value, net 13.47 MJ, wet mass 1 kg
- soybean oil, crude: 0.99017 kg; source Omni Tech International  2010; lognormal variance with pedigree 0.0406, pedigree (1,3,5,1,1)
  main input
  properties: carbon content, non-fossil 0.768, dry mass 1 kg, heating value, net 38.4 MJ, wet mass 1 kg
  note on heating value, net: Values is approximated from HHV from "vegetable oil, crude". Source: Radovanovic,M.; Zivanovic,T.; Stojiljkovic,D.; Jovanovic,V.; Jerinic,N.; Knezevic,S. et.al. Utilization of sunflower husk as a fuel for industrial boilers - 20 years experience. Proc. 5th Eur. Conf. on Industrial Furnaces&Boilers 2000,vol.2,p.221-233. Available at: https://phyllis.nl/Biomass/View/2152
- tap water: 0.000340142, 0.000634688, 5.72078e-6, 0.00022313, 0.00206312, 0.00857704, 0.00246396 kg (7 suppliers, which the file names only by identifier); sum of these 0.0143078 kg; source Omni Tech International  2010; lognormal variance with pedigree 0.0521, pedigree (1,2,5,5,1)
  Literature data and biodiesel producer
  properties: carbon content, fossil 0.00178991, dry mass 0.000337476 kg, water content 2962.17, wet mass 1 kg
- vegetable oil esterification facility: 2.78225e-10 unit; lognormal variance with pedigree 0.354, pedigree (1,4,5,5,1)
  Calculated according to feed capacity and lifetime of plant
- wastewater, average: -9.19785e-6, -1.36951e-7, -3.84653e-5, -2.31155e-7 m3 (4 suppliers, which the file names only by identifier); sum of these -4.80313e-5 m3; = 0.0426*3.785/1000; source Omni Tech International  2010; lognormal variance with pedigree 0.0034, pedigree (3,2,1,3,2)
  Wastewater from process. Conversion made from the original data in gallons.
  production volume
    Calculated from production volume of reference product using the relative outputs.
  properties: carbon content, non-fossil 0.194039, dry mass 0.346837 kg, water content 2882.2, wet mass 1000 kg

## Sampling procedure
Primary data - from National Biodiesel Board (NBB) members. Data collected for a year's period.

## Review by Bo Weidema 2012-05-31
Passed. Average reflecting new local datasets supplied, especially for USA.
Documentation of individual flows could still be improved.
