# ethanol production from sugar beet molasses

Dataset: EcoSpold 2, unit process
Geography: CH
Time period: 1998-01-01 to 2022-12-31
Technology level: current
Classification: ISIC rev.4 ecoinvent: 2011:Manufacture of basic chemicals
Classification: EcoSpold01Categories: biomass/fuels
Tags: ConvertedDataset
Scenario: Business-as-Usual
System model: Substitution, consequential, long-term
Share of production covered: 0 %
Generated by: Edgard Gnansounou
Published in: Jungbluth N. 2007
Database: ecoinvent
isCopyrightProtected: true

## General comment
Inventory refers to the production of 1 kg hydrated ethanol 95% (dry basis, i.e. 1.05 kg hydrated ethanol 95% wet basis), respectively 1 kg of stillage syrup (wet basis) from molasses. The multioutput-process 'sugar beet molasses, in distillery' delivers the co-products 'ethanol, 95% in H2O, from sugar beet molasses, at distillery' and 'syrup, from sugar beet molasses, at distillery'. Economic allocation with allocation factor for common stages of 94.5% to ethanol. Allocation is done according to carbon balance for CO2 emissions.
[This dataset was already contained in the ecoinvent database version 2. It was not individually updated during the transfer to ecoinvent version 3. Life Cycle Impact Assessment results may still have changed, as they are affected by changes in the supply chain, i.e. in other datasets. This dataset was generated following the ecoinvent quality guidelines for version 2. It may have been subject to central changes described in the ecoinvent version 3 change report (http://www.ecoinvent.org/database/ecoinvent-version-3/reports-of-changes/), and the results of the central updates were reviewed extensively. The changes added e.g. consistent water flows and other information throughout the database. The documentation of this dataset can be found in the ecoinvent reports of version 2, which are still available via the ecoinvent website. The change report linked above covers all central changes that were made during the conversion process.]

## Included activities end
This dataset includes the transport of molasses to the distillery, and the processing of molasses to hydrated ethanol (95%) and molasses stillage syrup (58% dry matter). System boundary is at the distillery. Dehydration to anhydrous ethanol is not included.

## Geography
Data is from the etha+ project (Alcosuisse, CH)

## Technology
The process is similar to that of sugarbeet-to-ethanol. The production of syrup from stillage includes pre-concentration and concentration. The syrup is 58% dry matter and is used as animal feed.

## Time period
Data from 1998 to 2005, current technology for the production of ethanol from sugar-based feedstocks

## Parameters
- fraction, process water, to air: 0.0523465 dimensionless; name fraction_PW_to_air; lognormal variance with pedigree 1.21, pedigree (5,5,5,5,5)
  Estimated value, expert opinion (Vionnet, S., Quantis Water Database - Technical Report, 2012).
  Calculated.
- fraction, tap water, to air: 0.0523465 dimensionless; name fraction_TW_to_air; = fraction_PW_to_air; lognormal variance with pedigree 1.21, pedigree (5,5,5,5,5)
  Calculated value. See comment in the other parametres present in this dataset. Tap water is considered to be always used as process water, thus process water fractions to air are applied to all tap water input flows to calculate the amount of water consumed in the processes.

## Reference product
- ethanol, without water, in 95% solution state, from fermentation: 1 kg; By-product classification allocatable product; CPC 35491: Biodiesel; CAS 64-17-5
  EcoSpold01Location=CH
  production volume 0 kg
    Production volume of ethanol for use as a fuel was 1-1.5 Ml in 2005 in CH
    No production in Switzerland. Source: http://www.biofuels-platform.ch/en/infos/eu-bioethanol.php
  property heating value, net 28.1 MJ
    Based on literature, page 275, Report 17: Jungbluth, N., Chudacoff, M., Dauriat, A., Dinkel, F., Doka, G., Faist Emmenegger, M., Gnansounou, E., Kljun, N., Schleiss, K., Spielmann, M., Stettler, C., Sutter, J. 2007: Life Cycle Inventories of Bioenergy. ecoinvent report No. 17, Swiss Centre for Life Cycle Inventories, Dübendorf, CH.
  property price 0.324 EUR2005
    Temporary price data. Calculated as 90% of purchasers price based on: 2005 prices from FAPRI2007, 2009. Agricultural outlook. (http://www.fapri.missouri.edu/outreach/publications/ag_outlook.asp?current_page=outreach; accessed 22/06/10). Unit conversion from US gallon to kg - 1 gallon = 3.7856 liter * 0.789 kg/liter (ethanol density) = 2.9868 kg
  properties: EcoSpold01Allocation_undefined_1 100, EcoSpold01Allocation_undefined_10 94.49, EcoSpold01Allocation_undefined_11 94.49, EcoSpold01Allocation_undefined_12 94.49, EcoSpold01Allocation_undefined_13 23.91, EcoSpold01Allocation_undefined_14 41.18, EcoSpold01Allocation_undefined_15 14.43, EcoSpold01Allocation_undefined_17 94.4849, EcoSpold01Allocation_undefined_2 100, EcoSpold01Allocation_undefined_3 0, EcoSpold01Allocation_undefined_4 94.49, EcoSpold01Allocation_undefined_5 94.49, EcoSpold01Allocation_undefined_6 94.49, EcoSpold01Allocation_undefined_7 94.49, EcoSpold01Allocation_undefined_8 94.49, EcoSpold01Allocation_undefined_9 94.49, carbon allocation 0.521739 kg, carbon content 0.521739, carbon content, fossil 0, carbon content, non-fossil 0.521739, dry mass 1 kg, water content 0, water in wet mass 0 kg, wet mass 1 kg

## Inputs from technosphere
- ammonium sulfate: 0.0050322 kg; lognormal variance with pedigree 0.0501, pedigree (1,2,5,1,1)
  EcoSpold01Location=RER
  Etha+ project Alcosuisse, industrial data
  Uncertainty: etha+ project Alcosuisse, industrial data
  properties: dry mass 1 kg, wet mass 1 kg
- electricity, medium voltage: 0.232282 kWh; lognormal variance with pedigree 0.0501, pedigree (1,2,5,1,1)
  Etha+ project Alcosuisse, industrial data
  EcoSpold01Location=CH
  Uncertainty: etha+ project Alcosuisse, industrial data
- ethanol fermentation plant: 4.87405e-10 unit; lognormal variance with pedigree 0.3501, pedigree (1,2,5,1,1)
  EcoSpold01Location=CH
  Etha+ project Alcosuisse, industrial data
  Uncertainty: etha+ project Alcosuisse, industrial data
- heat, district or industrial, natural gas: 12.6543 MJ; lognormal variance with pedigree 0.0501, pedigree (1,2,5,1,1)
  Etha+ project Alcosuisse, industrial data
  EcoSpold01Location=RER
  Uncertainty: etha+ project Alcosuisse, industrial data
  properties: heating value, net 1 MJ
- inorganic nitrogen fertiliser, as N: 0.0075483 kg; lognormal variance with pedigree 0.0501, pedigree (1,2,5,1,1)
  (same comment as for heat, district or industrial, natural gas)
  properties: dry mass 1 kg, wet mass 1 kg
- molasses, from sugar beet: 4.07598 kg; lognormal variance with pedigree 0.0501, pedigree (1,2,5,1,1)
  (same comment as for electricity, medium voltage)
  properties: carbon content, non-fossil 0.39592, dry mass 0.82 kg, water content 0.219512, wet mass 1 kg
  note on carbon content, non-fossil: Composition data obtained from Molasses Beet, in (http://beefmagazine.com/images/2009%20feed%20table.pdf). First, composition data were refered to 1 kg dry mass. Then, C-contents were calculated considering a C-content/dry mass of 46% in carbohydrates (including fibres), 53% in proteins and 75% in fats. All data from "Evolutionary and Biochemical Aspects", A.D. Kay and T. Vrede (in Global Ecology, 2010, Elsevier B.V., S.E. Jørgensen Ed.).
- sulfuric acid: 0.0377407 kg; lognormal variance with pedigree 0.0501, pedigree (1,2,5,1,1)
  (same comment as for heat, district or industrial, natural gas)
  properties: dry mass 1 kg, wet mass 1 kg
- tap water: 8.05128 kg; name tap_water_input; lognormal variance with pedigree 0.0501, pedigree (1,2,5,1,1)
  (same comment as for electricity, medium voltage)
  properties: carbon content, fossil 0.00178991, dry mass 0.000337476 kg, water content 2962.17, wet mass 1 kg
  note on carbon content, fossil: Bicarbonate content is 2.93 mol/m3. CO2 content is 0.1 mol/m3 (ecoinvent v2.2 report 8, Tab 93.1).
- vinasse, from fermentation of sugar beet molasses: -2.50383 kg
  EcoSpold01Location=CH
  production volume
    Production volume of ethanol for use as a fuel was 1-1.5 Ml in 2005 in CH
    Calculated from the production volume of ethanol, without water, in 95% solution state, from fermentation in proportion to the respective output amounts.
  properties: EcoSpold01Allocation_undefined_10 5.515, EcoSpold01Allocation_undefined_11 5.515, EcoSpold01Allocation_undefined_12 5.515, EcoSpold01Allocation_undefined_13 76.09, EcoSpold01Allocation_undefined_14 58.82, EcoSpold01Allocation_undefined_15 85.58, EcoSpold01Allocation_undefined_16 100, EcoSpold01Allocation_undefined_17 5.51505, EcoSpold01Allocation_undefined_3 100, EcoSpold01Allocation_undefined_4 5.515, EcoSpold01Allocation_undefined_5 5.515, EcoSpold01Allocation_undefined_6 5.515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
- wastewater, average: -0.00762982 m3; lognormal variance with pedigree 0.0101, pedigree (1,2,1,1,1)
  (same comment as for ethanol fermentation plant)
  production volume
    Calculated from the production volume of ethanol, without water, in 95% solution state, from fermentation in proportion to the respective output amounts.
  properties: carbon content, non-fossil 0.194039, dry mass 0.346837 kg, mass concentration, TOC 0.1091 kg/m3, mass concentration, calcium 0.039453 kg/m3, mass concentration, chlorine 0.030031 kg/m3, mass concentration, hydrogen 0.013365 kg/m3, mass concentration, nitrogen 0.031015 kg/m3, mass concentration, oxygen 0.069824 kg/m3, mass concentration, sodium 0.06456 kg/m3, mass concentration, sulfur 0.015602 kg/m3, water content 2882.2, wet mass 1000 kg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
  note on carbon content, non-fossil: 0.0673 kg TOC/m3 (Tab A.17, ecoinvent v2.2 report 13_I). TOC was considered as Total Carbon.

## Inputs from nature
- Carbon dioxide, in air [natural resource, in air]: 0.654439 kg; lognormal variance with pedigree 0.04, pedigree (1,1,5,1,1)
  Calculation, to close carbon balance
  Uncertainty: Calculation, to close carbon balance

## Emissions to nature
- Carbon dioxide, non-fossil [air, urban air close to ground]: 1.67657 kg; lognormal variance with pedigree 0.04, pedigree (1,1,5,1,1)
  Calculation, to close carbon balance
  Uncertainty: Calculation, to close carbon balance
- Water [air, unspecified]: 0.000421456 m3; name water_to_air_unspecified; = (tap_water_input/1000)-0.0018719; lognormal variance with pedigree 0.130025, pedigree (4,4,5,2,4)
  Calculated value based on literature values and expert opinion. See comments in the parametres' comment field.
  property fraction, origin: fresh water 1; name fraction_origin_fresh_water
  property fraction, origin: salt water 0; name fraction_origin_salt_water
  property fraction, origin: unspecified 0; name fraction_origin_unspecified

## Sampling procedure
Data is from the etha+ project (Alcosuisse, CH), technology by French ethanol plant supplier, modelling by ENERS (CH)

## Review by Niels Jungbluth 2006-08-15
Passed.
none
