# particleboard production, uncoated, average glue mix

Dataset: EcoSpold 2, unit process
Geography: RoW
Time period: 2012-01-01 to 2022-12-31
Technology level: current
Classification: ISIC rev.4 ecoinvent: 1621:Manufacture of veneer sheets and wood-based panels
Classification: EcoSpold01Categories: wooden materials/processing
Synonyms: particleboard; Chipboard
Scenario: Business-as-Usual
System model: Substitution, consequential, long-term
Generated by: Frank Werner
Database: ecoinvent
isCopyrightProtected: true

## General comment
This dataset represents particle board production as the weighted average of particle boards produced by the members of the European Panel Federation (EPF)
Particleboard (PB) is manufactured from the dry wood-panel production process under pressure and heat from particles of wood (flakes, chips, shavings, sawdust and similar) and/or other lignocellulosic material in particle form (flax shives, hemp shives, bagasse fragments and similar) with the addition of an adhesive.
Particleboard, or particle board (or chipboard in the UK and Commonwealth Nations such as Austra-lia, New Zealand and others), is an engineered wood product manufactured from wood chips, saw-mill shavings, or saw dust, and a synthetic resin or other suitable binder, which is pressed and ex-truded. Particleboard is a composite material according to the standard EN 312. The density of stan-dard particleboard can vary between 650 – 750 kg/m3, whereas densities for low density particle-board can be as low as 250 kg/m3 and range up to 1300 kg/m3 for high density particleboard. Typical thickness is in a range of 3 to > 40 mm.

The inventoried particle board has the following composition:

The inventoried particle board has the following composition:

Seven types of boards are classified and are distinguished as follows (EN 312):P1 General purpose boards for use in dry conditions,
P2 Boards for interior fitments (including furniture) for use in dry conditions,
P3 Non load-bearing boards for use in humid conditions,
P4 Load-bearing boards for use in dry conditions,
P5 Load-bearing boards for use in humid conditions,
P6 Heavy duty load-bearing boards for use in dry conditions,
P7 Heavy duty load-bearing boards for use in humid conditions.
Particleboard is mainly used in furniture manufacturing.
Particleboard can also be used for structural applications. Different types of speciality boards can be produced according to individual building application requirements; moisture resistance, fire retar-dance or acoustic insulation are all properties which can be achieved by using specific types of parti-cleboard.
Particleboard can also be used for construction purposes in combination with other materials, for example in parquet or insulation materials.
Production is subject to the regulations of the Industrial Emissions Directive (EU-IED, 2011) if the production capacity exceeds 600 m3 per day where one or more of the following wood-based panels are produced: particleboard, oriented strand board or fibreboard.
Particleboard is fully recyclable. It can show a broad range of variation of surfaces and characteristics (including e.g. fire retardation and moisture resistance).

## Included activities start
From the reception at the factory gate of all materials and fuels used.

## Included activities end
Activity ends with the uncoated particle board at the factory gate.

## Geography
Representation of the production of the member companies of the European Panel Federation (EPF).

## Technology
Particleboard is manufactured by mixing wood particles or flakes together with a resin and forming the mix into a sheet. The raw material to be used for the particles is fed into a disc chipper with between four and sixteen radially arranged blades. The particles are first dried, after which any oversized or undersized particles are screened out. Resin, in liquid form, is then sprayed through nozzles onto the particles. There are several types of resins that are commonly used. Amino-formaldehyde based resins are the best performing when considering cost and ease of use. Urea melamine resins are used to offer water resistance with increased melamine offering enhanced resistance. Phenol formaldehyde is typically used where the panel is used in external applications due to the increased water resistance offered by phenolic resins and also the colour of the resin resulting in a darker panel. Melamine urea phenolic formaldehyde resins exist as a compromise. To enhance the panel properties even further the use of resorcinol resins typically mixed with phenolic resins are used, but this is usually used with plywood for marine applications and a rare occasion in panel production.

## Parameters
- input wood fuel: 1663.94 MJ; name wood_fuel; = 87.3*19.06
  input of wood fuel used in production, i.e. wood fuel from forestry, internal wood residues, post-consumer wood used for energy purposes, etc; expressed in MJ of absolutely dry mass (lower heating value at humidity u=0%)

## Reference product
- particleboard, uncoated: 1 m3; name RP_amount_1; By-product classification allocatable product; CPC 31431: Particle board
  production volume 6.1e7 m3
    FaoStat 2011
  property dry mass 599.3 kg; name DM
  property heating value, net 8749.71 MJ
    LHV is calculated based on the Carbon content of the product. More details can be found on the respective documentation.The property is based on a value of 13.74MJ/kg
  property price 217 EUR2005
    Export prices for the World+ according to: http://faostat.fao.org/site/626/DesktopDefault.aspx?PageID=626#ancor downloaded 28 April 2009; calculated as export value divided by export volume.
  property water content 0.0629067; = WiWM/DM
  property water in wet mass 37.7 kg; name WiWM
  properties: carbon allocation 291.82 kg, carbon content 0.486935, carbon content, fossil 0.0453387, carbon content, non-fossil 0.441596, wet mass 637 kg

## Inputs from technosphere
- aluminium sulfate, powder: 1.564 kg; = 0.284+1.28; lognormal variance with pedigree 0.043, pedigree (1,5,4,5,1)
  aluminium sulfate plus input of unspecified hardeners
  properties: dry mass 1 kg, wet mass 1 kg
- bark chips, wet, measured as dry mass: -0.125, -0.125 kg (2 suppliers, which the file names only by identifier); sum of these -0.25 kg; lognormal variance with pedigree 0.0356, pedigree (2,5,1,5,1)
  bark from debarking of logs, not used energetically
  production volume
    Calculated from production volume of reference product using the relative outputs.
  properties: carbon content, non-fossil 0.494, dry mass 1 kg, heating value, net 4.81 MJ, price 0.034 EUR2005, water content 1.4, wet mass 2.4 kg
- biowaste: -4.81 kg; name w_biowaste; lognormal variance with pedigree 0.0356, pedigree (2,5,1,5,1)
  sludges from chip washing etc.
  production volume
    Calculated from production volume of reference product using the relative outputs.
  properties: carbon content, non-fossil 0.1624, dry mass 0.4 kg, heating value, net 4.29 MJ, water content 1.5, wet mass 1 kg
  note on heating value, net: Value taken from the general comment of the treatment dataset.
- chemical, organic: 0.38818 kg; lognormal variance with pedigree 0.043, pedigree (1,5,4,5,1)
  input of unspecified additives, dyes, flame redardants, etc.
  properties: carbon content, fossil 0.628, dry mass 1 kg, heating value, net 19.03 MJ, wet mass 1 kg
  note on carbon content, fossil: This dataset is an unweighted average of 20 organic substances (listed in Tab 88.1, ecoinvent v2.2 report 8, part II), being part of the top100 chemicals included in this database. The C-content has also been calculated as an unweighted average of the C content of the substances composing this dataset.
- diesel, burned in building machine: 28.6 MJ; lognormal variance with pedigree 0.043, pedigree (1,5,4,5,1)
  for internal transport
  properties: heating value, net 1 MJ
- dust collector, electrostatic precipitator, for industrial use: 2.20099e-6 unit; = 1.3889E-09*wood_fuel/1.05; lognormal variance with pedigree 0.043, pedigree (1,5,4,5,1)
  Infrastructure factor from DS on heat generation from industrial residual wood mulitplied by the input of wood fuel (direct wood fuel plus production residues); correction for assumed efficiency as original value refers to heat output
- electricity, medium voltage: 9.91102, 6.86624, 0.368026, 81.7725, 0.370822, 4.71142 kWh (6 suppliers, which the file names only by identifier); sum of these 104 kWh; lognormal variance with pedigree 0.043, pedigree (1,5,4,5,1)
- furnace, wood chips, softwood storage area, 1000kW: 1.09986e-5 unit; = 6.61E-09*wood_fuel; lognormal variance with pedigree 0.028, pedigree (1,5,4,5,1)
  EcoSpold01Location=CH
  Factor from DS on heat generation from industrial residual wood mulitplied by the input of wood fuel (direct wood fuel plus production residues)
- furnace, wood chips, with silo, 5000kW: 4.64841e-5 unit; = 2.9333E-08*wood_fuel/1.05; lognormal variance with pedigree 0.043, pedigree (1,5,4,5,1)
  (same comment as for dust collector, electrostatic precipitator, for industrial use)
- hazardous waste, for incineration: -0.08374 kg; name w_HW; lognormal variance with pedigree 0.035, pedigree (1,5,1,5,1)
  Output of minor quantities of waste resins, oily filters and rags
  production volume
    Calculated from production volume of reference product using the relative outputs.
  properties: carbon content, fossil 0.554667, dry mass 0.75 kg, heating value, net 17 MJ, water content 0.333333, wet mass 1 kg
  note on carbon content, fossil: Tab A.6, ecoinvent v2.2 report 13_I. C content has been calculated after data in the tables, and then referred to 1 kg DM
- heat, district or industrial, natural gas: 198.762 MJ; = (172+36.7)/1.05; lognormal variance with pedigree 0.043, pedigree (1,5,4,5,1)
  Input of natural gas plus liquified petrolium gas, converted to heat output
  properties: heating value, net 1 MJ
- heat, district or industrial, other than natural gas: 24.9524 MJ; = 26.2/1.05; lognormal variance with pedigree 0.043, pedigree (1,5,4,5,1)
  Fuel input, converted to heat output
  properties: heating value, net 1 MJ
- heat, district or industrial, other than natural gas: -49.2141, -0.0859366 MJ (2 suppliers, which the file names only by identifier); sum of these -49.3 MJ; lognormal variance with pedigree 0.035, pedigree (1,5,1,5,1)
  export of sur-plus heat
  production volume
    Calculated from production volume of reference product using the relative outputs.
  properties: heating value, net 1 MJ, price 0.0106 EUR2005
- heat, district or industrial, other than natural gas: 22.4762 MJ; = 23.6/1.05; lognormal variance with pedigree 0.043, pedigree (1,5,4,5,1)
  Fuel input, converted to heat output
- lubricating oil: 0.2511 kg; = 0.0481+0.203; lognormal variance with pedigree 0.043, pedigree (1,5,4,5,1)
  input of lubricating oils plus mineral oils, incl. thermooil
  properties: carbon content, fossil 0.75, dry mass 1 kg, heating value, net 40.2 MJ, wet mass 1 kg
  note on carbon content, fossil: Lubricating oil is produced from diesel. C-content/dry mass of fats and oils considered 75%, from: ecoinvent v2.2 report, n 15a, pg 40
  note on heating value, net: Literature value, Source: IPCC 2006, 2006 IPCC Guidelines for National Greenhouse Gas Inventories, Prepared by the National Greenhouse Gas Inventories Programme, Eggleston H.S., Buendia L., Miwa K., Ngara T. and Tanabe K. (eds). Published: IGES, Japan
- melamine formaldehyde resin: 9.86 kg; lognormal variance with pedigree 0.043, pedigree (1,5,4,5,1)
  part of glueing system (inventoried as averaged production average in Europe)
  properties: carbon content, fossil 0.311708, dry mass 1 kg, heating value, net 9.44 MJ, wet mass 1 kg
- methylene diphenyl diisocyanate: 3.22 kg; lognormal variance with pedigree 0.043, pedigree (1,5,4,5,1)
  part of glueing system (inventoried as averaged production average in Europe)
  properties: carbon content, fossil 0.72, dry mass 1 kg, heating value, net 26.66 MJ, wet mass 1 kg
- paraffin: 3.02 kg; lognormal variance with pedigree 0.043, pedigree (1,5,4,5,1)
  hydrophobing agent
  properties: carbon content, fossil 0.847059, dry mass 1 kg, heating value, net 41.5 MJ, wet mass 1 kg
  note on heating value, net: Indicative value. Reference: Fuels - Higher and Lower Calorific Values, available at: https://www.engineeringtoolbox.com/fuels-higher-calorific-values-d_169.html
- phenolic resin: 1.21 kg; lognormal variance with pedigree 0.043, pedigree (1,5,4,5,1)
  part of glueing system (inventoried as averaged production average in Europe)
  properties: carbon content, fossil 0.772277, dry mass 1 kg, heating value, net 33.57 MJ, wet mass 1 kg
- pulpwood, hardwood, measured as solid wood under bark: 0.00241259 m3; = 1.38/572; lognormal variance with pedigree 0.043, pedigree (1,5,4,5,1)
  input in kg divided by the basic wood density of 572 kg/m3
  properties: carbon content, non-fossil 0.494, dry mass 681.818 kg, heating value, net 6071.3 MJ, water content 0.8, wet mass 1227.27 kg
  note on heating value, net: Value based on "hardwood forestry, mixed species, sustainable forest management"The property is based on a value of 11.58MJ/kg
- pulpwood, softwood, measured as solid wood under bark: 0.260317 m3; = 98.4/378; lognormal variance with pedigree 0.043, pedigree (1,5,4,5,1)
  input in kg divided by the basic wood density of 378 kg/m3
  properties: carbon content, non-fossil 0.494, dry mass 440 kg, heating value, net 4483.78 MJ, water content 0.7, wet mass 748 kg
  note on heating value, net: Value based on "softwood forestry, mixed species, sustainable forest management"The property is based on a value of 11.58MJ/kg
- sawdust, wet, measured as dry mass: 12.15, 12.15 kg (2 suppliers, which the file names only by identifier); sum of these 24.3 kg; lognormal variance with pedigree 0.0146, pedigree (1,3,4,5,1)
  input of sawdust
  properties: carbon content, non-fossil 0.494, dry mass 1 kg, heating value, net 7.79 MJ, water content 0.7, wet mass 1.7 kg
- slab and siding, softwood, wet, measured as dry mass: 62.6, 62.6 kg (2 suppliers, which the file names only by identifier); sum of these 125.2 kg; lognormal variance with pedigree 0.0146, pedigree (1,3,4,5,1)
  input of industrial residual wood
  properties: carbon content, non-fossil 0.494, dry mass 1 kg, heating value, net 7.79 MJ, water content 0.7, wet mass 1.7 kg
- tap water: 4.28758, 21.5525, 8.00042, 0.072112, 2.81261, 108.116, 31.0589 kg (7 suppliers, which the file names only by identifier); sum of these 175.9 kg; lognormal variance with pedigree 0.043, pedigree (1,5,4,5,1)
  properties: carbon content, fossil 0.00178991, dry mass 0.000337476 kg, water content 2962.17, wet mass 1 kg
  note on carbon content, fossil: Bicarbonate content is 2.93 mol/m3. CO2 content is 0.1 mol/m3 (ecoinvent v2.2 report 8, Tab 93.1).
- urea: 0.026706, 0.211161, 0.180317 kg (3 suppliers, which the file names only by identifier); sum of these 0.418184 kg; = (0.418/(12+4+2*14+16)*(2*14))*2.14379903903132; lognormal variance with pedigree 0.043, pedigree (1,5,4,5,1)
  The exchange has been updated from 'urea, as N' into 'urea' and therefore its amount has been scaled (multiplied) from 0.1951 kg by 2.1438 kg of 'urea' per kg of 'urea, as N'. Original comment of the exchange is: input of urea, converted to input of N via molar relationship
  properties: carbon content, fossil 0.2, dry mass 1 kg, wet mass 1 kg
- urea formaldehyde resin: 44.8 kg; lognormal variance with pedigree 0.043, pedigree (1,5,4,5,1)
  part of glueing system (inventoried as averaged production average in Europe)
  properties: carbon content, fossil 0.408958, dry mass 1 kg, heating value, net 12.39 MJ, wet mass 1 kg
- wastewater from particle board production: -0.071 m3; name w_WW; lognormal variance with pedigree 0.035, pedigree (1,5,1,5,1)
  production volume
    Calculated from production volume of reference product using the relative outputs.
  properties: carbon content, non-fossil 4.4393e-12, dry mass 0.00279718 kg, mass concentration, TOC 0.0015871 kg/m3, mass concentration, hydrogen 0.0010157 kg/m3, mass concentration, oxygen 0.00019441 kg/m3, water content 357502, wet mass 1000 kg
- wood ash mixture, pure: -0.792034 kg; name w_wood_ash; = 0.000476*wood_fuel; lognormal variance with pedigree 0.035, pedigree (1,5,1,5,1)
  Emission factor from DS on heat generation from industrial residual wood mulitplied by the input of wood fuel (direct wood fuel plus production residues)
  EcoSpold01Location=CH
  production volume
    Calculated from production volume of reference product using the relative outputs.
  properties: carbon content, non-fossil 0.012, dry mass 1 kg, wet mass 1 kg
- wood chips, dry, measured as dry mass: 200.61 kg; = 3.09+2.52+31.6+163.4; lognormal variance with pedigree 0.043, pedigree (1,5,4,5,1)
  input of different types of wood chips from sawmills
  properties: carbon content, non-fossil 0.494, dry mass 1 kg, heating value, net 9.99 MJ, water content 0.4, wet mass 1.4 kg
  note on carbon content, non-fossil: C content of dry mass is 0.494 kgC/kg dry wood (ecoinvent v2.2 report 9).
- wood chips, from post-consumer wood, measured as dry mass: 182.1 kg; lognormal variance with pedigree 0.043, pedigree (1,5,4,5,1)
  properties: carbon content, non-fossil 0.494, dry mass 1 kg, heating value, net 9.99 MJ, water content 0.4, wet mass 1.4 kg
- wood chips, wet, measured as dry mass: 20.5534, 0.0465693 kg (2 suppliers, which the file names only by identifier); sum of these 20.6 kg; = 14.6+6; lognormal variance with pedigree 0.268, pedigree (1,5,4,5,1)
  input of wood chips from forestry plus wood chips from sawmills (wet)
  properties: carbon content, non-fossil 0.494, dry mass 1 kg, heating value, net 10.84 MJ, water content 1.1, wet mass 2.1 kg
  note on heating value, net: Value based on the dataset 'softwood forestry, mixed species, sustainable forest management'
- wooden board factory, organic bonded boards: 3.80952e-8 unit; = 1/(525000*50); lognormal variance with pedigree 0.043, pedigree (1,5,4,5,1)
  estimated based on an assumed yearly production volume o 525,000 m3/year and a life time of infrastructure of 50 years

## Inputs from nature
- Water, cooling, unspecified natural origin [natural resource, in water]: 0.0619 m3; lognormal variance with pedigree 0.042, pedigree (1,5,4,5,1)
- Water, well, in ground [natural resource, in water]: 0.00197 m3; lognormal variance with pedigree 0.043, pedigree (1,5,4,5,1)

## Emissions to nature
- Acetaldehyde [air, urban air close to ground]: 0.0004395 kg; = 6.1E-08*wood_fuel+0.000338; lognormal variance with pedigree 0.4806, pedigree (2,5,5,5,1)
  Emission factor from DS on heat generation from industrial residual wood mulitplied by the input of wood fuel (direct wood fuel plus production residues ) plus estimated emissions from wood and glue drying processes (based on Albrecht et al. 2009).
- Ammonia [air, urban air close to ground]: 0.00365538 kg; = 2.30666666666667E-06*wood_fuel/1.05; lognormal variance with pedigree 0.4806, pedigree (2,5,5,5,1)
  Emission factor from DS 'Heat, district or industrial, other than natural gas {CH}| heat production, wood chips from industry, at furnace 5000kW | Cut-off, U' on heat generation from industrial residual wood per MJ, multiplied by the input of wood fuel (direct wood fuel plus production residues ) scaled to reflect wood input per generated heat.
- Arsenic ion [air, urban air close to ground]: 2.11294e-6 kg; = 1.33333333333333E-09*wood_fuel/1.05; lognormal variance with pedigree 0.4806, pedigree (2,5,5,5,1)
  (same comment as for Ammonia)
- Benzene [air, urban air close to ground]: 0.00192277 kg; = 1.21333333333333E-06*wood_fuel/1.05; lognormal variance with pedigree 0.4806, pedigree (2,5,5,5,1)
  (same comment as for Ammonia)
- Benzene, ethyl- [air, urban air close to ground]: 6.33881e-5 kg; = 0.00000004*wood_fuel/1.05; lognormal variance with pedigree 0.4806, pedigree (2,5,5,5,1)
  (same comment as for Ammonia)
- Benzene, hexachloro- [air, urban air close to ground]: 1.52131e-11 kg; = 9.60000000000001E-15*wood_fuel/1.05; lognormal variance with pedigree 0.4806, pedigree (2,5,5,5,1)
  (same comment as for Ammonia)
- Benzo(a)pyrene [air, urban air close to ground]: 1.05647e-6 kg; = 6.66666666666667E-10*wood_fuel/1.05; lognormal variance with pedigree 0.4806, pedigree (2,5,5,5,1)
  (same comment as for Ammonia)
- Bromine [air, urban air close to ground]: 0.000126776 kg; = 0.00000008*wood_fuel/1.05; lognormal variance with pedigree 0.4806, pedigree (2,5,5,5,1)
  (same comment as for Ammonia)
- Cadmium II [air, urban air close to ground]: 1.47906e-6 kg; = 9.33333333333334E-10*wood_fuel/1.05; lognormal variance with pedigree 0.4806, pedigree (2,5,5,5,1)
  (same comment as for Ammonia)
- Calcium [air, urban air close to ground]: 0.0123607 kg; = 0.0000078*wood_fuel/1.05; lognormal variance with pedigree 0.4806, pedigree (2,5,5,5,1)
  (same comment as for Ammonia)
- Carbon dioxide, non-fossil [air, urban air close to ground]: 226.084 kg; = 0.142666666666666*wood_fuel/1.05; lognormal variance with pedigree 0.0506, pedigree (2,5,5,5,1)
  (same comment as for Ammonia)
- Carbon monoxide, non-fossil [air, urban air close to ground]: 0.422587 kg; = 0.000266666666666667*wood_fuel/1.05; lognormal variance with pedigree 0.0706, pedigree (2,5,5,5,1)
  (same comment as for Ammonia)
- Chlorine [air, urban air close to ground]: 0.000380329 kg; = 0.00000024*wood_fuel/1.05; lognormal variance with pedigree 0.4806, pedigree (2,5,5,5,1)
  (same comment as for Ammonia)
- Chromium III [air, urban air close to ground]: 8.36723e-6 kg; = 5.28000000000001E-09*wood_fuel/1.05; lognormal variance with pedigree 0.4806, pedigree (2,5,5,5,1)
  (same comment as for Ammonia)
- Chromium VI [air, urban air close to ground]: 8.45175e-8 kg; = 5.33333333333334E-11*wood_fuel/1.05; lognormal variance with pedigree 0.5306, pedigree (2,5,5,5,1)
  (same comment as for Ammonia)
- Copper ion [air, urban air close to ground]: 4.64846e-5 kg; = 2.93333333333334E-08*wood_fuel/1.05; lognormal variance with pedigree 0.4806, pedigree (2,5,5,5,1)
  (same comment as for Ammonia)
- Dinitrogen monoxide [air, urban air close to ground]: 0.00485976 kg; = 3.06666666666667E-06*wood_fuel/1.05; lognormal variance with pedigree 0.4806, pedigree (2,5,5,5,1)
  (same comment as for Ammonia)
- Dioxins, measured as 2,3,7,8-tetrachlorodibenzo-p-dioxin [air, urban air close to ground]: 6.55011e-11 kg; = 4.13333333333333E-14*wood_fuel/1.05; lognormal variance with pedigree 0.4806, pedigree (2,5,5,5,1)
  (same comment as for Ammonia)
- Fluorine [air, urban air close to ground]: 0.000105647 kg; = 6.66666666666667E-08*wood_fuel/1.05; lognormal variance with pedigree 0.4806, pedigree (2,5,5,5,1)
  (same comment as for Ammonia)
- Formaldehyde [air, urban air close to ground]: 0.0922747 kg; = 1.73333333333334E-07*wood_fuel/1.05+0.092; lognormal variance with pedigree 0.4806, pedigree (2,5,5,5,1)
  Emission factor from DS 'Heat, district or industrial, other than natural gas {CH}| heat production, wood chips from industry, at furnace 5000kW | Cut-off, U' on heat generation from industrial residual wood per MJ, multiplied by the input of wood fuel (direct wood fuel plus production residues ) scaled to reflect wood input per generated heat plus estimated emissions from wood and glue drying processes (as in ecoinvent 2.2).
- Hydrocarbons, aliphatic, alkanes, unspecified [air, urban air close to ground]: 0.00192277 kg; = 1.21333333333333E-06*wood_fuel/1.05; lognormal variance with pedigree 0.4806, pedigree (2,5,5,5,1)
  (same comment as for Ammonia)
- Hydrocarbons, aliphatic, unsaturated [air, urban air close to ground]: 0.00655011 kg; = 4.13333333333333E-06*wood_fuel/1.05; lognormal variance with pedigree 0.4806, pedigree (2,5,5,5,1)
  (same comment as for Ammonia)
- Lead II [air, urban air close to ground]: 5.28234e-5 kg; = 3.33333333333333E-08*wood_fuel/1.05; lognormal variance with pedigree 0.4806, pedigree (2,5,5,5,1)
  (same comment as for Ammonia)
- Magnesium [air, urban air close to ground]: 0.000760657 kg; = 0.00000048*wood_fuel/1.05; lognormal variance with pedigree 0.4806, pedigree (2,5,5,5,1)
  (same comment as for Ammonia)
- Manganese II [air, urban air close to ground]: 0.000359199 kg; = 2.26666666666667E-07*wood_fuel/1.05; lognormal variance with pedigree 0.4806, pedigree (2,5,5,5,1)
  (same comment as for Ammonia)
- Mercury II [air, urban air close to ground]: 6.33881e-7 kg; = 0.0000000004*wood_fuel/1.05; lognormal variance with pedigree 0.4806, pedigree (2,5,5,5,1)
  (same comment as for Ammonia)
- Methane, non-fossil [air, urban air close to ground]: 0.00316941 kg; = 0.000002*wood_fuel/1.05; lognormal variance with pedigree 0.4806, pedigree (2,5,5,5,1)
  (same comment as for Ammonia)
- Methanol [air, non-urban air or from high stacks]: 0.0177 kg; lognormal variance with pedigree 0.482, pedigree (3,5,5,5,1)
  Estimated emissions from wood and glue drying processes
- NMVOC, non-methane volatile organic compounds [air, urban air close to ground]: 0.406357 kg; = 4.66666666666666E-06*wood_fuel/1.05 + (0.509-0.092-0.0177-0.000338); lognormal variance with pedigree 0.2106, pedigree (2,5,5,5,1)
  Emission factor from DS 'Heat, district or industrial, other than natural gas {CH}| heat production, wood chips from industry, at furnace 5000kW | Cut-off, U' on heat generation from industrial residual wood per MJ, multiplied by the input of wood fuel (direct wood fuel plus production residues ) scaled to reflect wood input per generated heat plus estimated emissions from wood and glue drying processes (based on Albrecht et al. 2009), minus VOC emissions that are inventoried specifically.
- Nickel II [air, urban air close to ground]: 1.26776e-5 kg; = 0.000000008*wood_fuel/1.05; lognormal variance with pedigree 0.4806, pedigree (2,5,5,5,1)
  (same comment as for Ammonia)
- Nitrogen oxides [air, urban air close to ground]: 0.475411 kg; = 0.0003*wood_fuel/1.05; lognormal variance with pedigree 0.1206, pedigree (2,5,5,5,1)
  (same comment as for Ammonia)
- PAH, polycyclic aromatic hydrocarbons [air, urban air close to ground]: 2.34536e-5 kg; = 0.0000000148*wood_fuel/1.05; lognormal variance with pedigree 0.4806, pedigree (2,5,5,5,1)
  (same comment as for Ammonia)
- Particulate Matter, < 2.5 um [air, urban air close to ground]: 0.0528234 kg; = 0.0000333333333333333*wood_fuel/1.05; lognormal variance with pedigree 0.1206, pedigree (2,5,5,5,1)
  (same comment as for Ammonia)
- Particulate Matter, > 10 um [air, unspecified]: 0.0781 kg; lognormal variance with pedigree 0.448, pedigree (3,5,4,1,1)
  dust emissions
- Phenol, pentachloro- [air, urban air close to ground]: 1.71148e-8 kg; = 0.0000000000108*wood_fuel/1.05; lognormal variance with pedigree 0.4806, pedigree (2,5,5,5,1)
  (same comment as for Ammonia)
- Phosphorus [air, urban air close to ground]: 0.000633881 kg; = 0.0000004*wood_fuel/1.05; lognormal variance with pedigree 0.4806, pedigree (2,5,5,5,1)
  (same comment as for Ammonia)
- Potassium I [air, urban air close to ground]: 0.0494427 kg; = 0.0000312*wood_fuel/1.05; lognormal variance with pedigree 0.4806, pedigree (2,5,5,5,1)
  (same comment as for Ammonia)
- Sodium [air, urban air close to ground]: 0.00274682 kg; = 1.73333333333334E-06*wood_fuel/1.05; lognormal variance with pedigree 0.4806, pedigree (2,5,5,5,1)
  (same comment as for Ammonia)
- Sulfur dioxide [air, urban air close to ground]: 0.00528234 kg; = 3.33333333333334E-06*wood_fuel/1.05; lognormal variance with pedigree 0.4806, pedigree (2,5,5,5,1)
  (same comment as for Ammonia)
- Toluene [air, urban air close to ground]: 0.000633881 kg; = 0.0000004*wood_fuel/1.05; lognormal variance with pedigree 0.4806, pedigree (2,5,5,5,1)
  (same comment as for Ammonia)
- Zinc II [air, urban air close to ground]: 0.000633881 kg; = 0.0000004*wood_fuel/1.05; lognormal variance with pedigree 0.4806, pedigree (2,5,5,5,1)
  (same comment as for Ammonia)
- m-Xylene [air, urban air close to ground]: 0.000253552 kg; = 0.00000016*wood_fuel/1.05; lognormal variance with pedigree 0.4806, pedigree (2,5,5,5,1)
  (same comment as for Ammonia)

## Sampling procedure
Survey among member companies of the European Panel Federation; emissions profile per MJ wood input from PSI (2014)
