# phosphoric acid production, dihydrate process

Dataset: EcoSpold 2, unit process
Geography: RoW
Time period: 1986-01-01 to 2022-12-31
Technology level: current
Classification: ISIC rev.4 ecoinvent: 2012:Manufacture of fertilizers and nitrogen compounds
Tags: ConvertedDataset
Scenario: Business-as-Usual
System model: Substitution, consequential, long-term
Share of production covered: 30 %
Generated by: Alex Primas
Published in: Althaus H.-J. 2004
Database: ecoinvent
isCopyrightProtected: true

## General comment
The process describes the production of phosphoric acid from phosphate rock with the dyhydrate process in Morocco. As products of the multi output process fertiliser grade phosphoric acid (impure with 51% P2O5) and dilute fluosilic acid (22% in H2O) was considered.

## Included activities end
Raw materials, processing chemicals and processing energy, direct emissions to air from process, emissions to air and water from phosphogypsum disposal, emission of radioactive substances from gypsum to air and water, transport of raw materials to the plant, estimation for process infrastructure. The process includes data on emissions from phosphogypsum disposal to the ocean.

## Geography
This dataset is a weighted average built from the following geographies: US, RER, MA.

## Technology
This dataset is a weighted average built from the following geographies: RER, US, MA.

## Reference product
- phosphoric acid, fertiliser grade, without water, in 70% solution state: 1 kg; By-product classification allocatable product; CPC 34232: Phosphoric acid; CAS 7664-38-2
  production volume 5.37265e10 kg
    Based on Ullmann's encyclopedia, the production volume of phosphoric acid is reported for the year of 1989.
    Reference: Schrödter, 2008, Phosphoric Acid and Phosphates, Ullmann's Encyclopedia of Industrial Chemistry
  property oxygen content 0.304333
    Oxygen content (on a dry matter basis) of phosphoric acid, fertiliser grade, without water, in 70% solution state is calculated from the molecular formula of the substance (H3PO4).
  property phosphorus content 0.235667
    Phosphorus content (on a dry matter basis) of phosphoric acid, fertiliser grade, without water, in 70% solution state is calculated from the molecular formula of the substance (H3PO4).
  property price 0.242 EUR2005
    Temporary price data. Calculated as 90% of purchasers price based on: 2005 import prices (total trades (USD) divided by total weight (kg) in biggest economies of the world: EU27, USA, Brasil, China, India, Japan and Russia) from UN Commodity Trade Statistics Database (http://data.un.org/Explorer.aspxDatabase [Accessed 2011.06.22]). Commodity: Phosphoric acid and polyphosphoric acids
  properties: carbon allocation 0 kg, carbon content 0, carbon content, fossil 0, carbon content, non-fossil 0, dry mass 1 kg, water content 0, water in wet mass 0 kg, wet mass 1 kg

## Inputs from technosphere
- electricity, low voltage: 6.09819e-7, 1.45233e-5, 9.05837e-5, 0.00545162, 1.2866e-6, 6.61291e-7, 0.000100129, 3.17822e-6, 4.12667e-6, 2.15053e-6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 kWh (34 suppliers, which the file names only by identifier); sum of these 0.00660687 kWh; lognormal variance with pedigree 0.0433, pedigree (2,2,5,5,1)
  This flow is weighted averages using the exchanges in the corresponding regional data.
- electricity, medium voltage: 0.00886774, 1.00837e-5, 7.54679e-5, 6.82981e-5, 0.00135774, 1.75758e-6, 7.24387e-5, 4.6309e-5, 0.000559021, 6.01285e-5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 kWh (34 suppliers, which the file names only by identifier); sum of these 0.0880109 kWh; lognormal variance with pedigree 0.0806, pedigree (2,1,4,5,4)
  This flow is weighted averages using the exchanges in the corresponding regional data.
- fluosilicic acid, without water, in 22% solution state: -0.0162632 kg
  production volume
    Calculated based on the production volume of the reference product.
  properties: dry mass 1 kg, price 0.706 EUR2005, wet mass 1 kg
- heat, district or industrial, natural gas: 0.364245, 2.4005 MJ (2 suppliers, which the file names only by identifier); sum of these 2.76474 MJ; lognormal variance with pedigree 0.0621, pedigree (3,2,5,5,3)
  This flow is weighted averages using the exchanges in the corresponding regional data.
  properties: heating value, net 1 MJ
- heat, district or industrial, other than natural gas: 0.469006, 0.000818969 MJ (2 suppliers, which the file names only by identifier); sum of these 0.469825 MJ; lognormal variance with pedigree 0.0621, pedigree (3,2,5,5,3)
  This flow is weighted averages using the exchanges in the corresponding regional data.
  properties: heating value, net 1 MJ
- phosphate rock, beneficiated: 1.65944 kg; lognormal variance with pedigree 0.0438, pedigree (2,3,5,5,1)
  This flow is weighted averages using the exchanges in the corresponding regional data.
  properties: dry mass 1 kg, oxygen content 0.180345, phosphorus content 0.139655, wet mass 1 kg
  note on oxygen content: Oxygen content (on a dry matter basis) of phosphate rock, beneficiated is calculated from the molecular formula of the substance ().
  note on phosphorus content: Phosphorus content (on a dry matter basis) of phosphate rock, beneficiated is calculated from the molecular formula of the substance ().
- phosphoric acid factory, fertiliser grade: 2.95572e-10 unit; lognormal variance with pedigree 0.448, pedigree (4,5,5,5,4)
  This flow is weighted averages using the exchanges in the corresponding regional data.
- quicklime, milled, loose: 0.0784938 kg; lognormal variance with pedigree 0.0712, pedigree (2,3,5,5,3)
  This flow is weighted averages using the exchanges in the corresponding regional data.
  properties: dry mass 0.99 kg, water content 0.010101, wet mass 1 kg
- steam, in chemical industry: 0.0779155 kg; lognormal variance with pedigree 0.0433, pedigree (2,2,5,5,1)
  This flow is weighted averages using the exchanges in the corresponding regional data.
  properties: dry mass 1 kg, wet mass 1 kg
- sulfuric acid: 1.3984 kg; lognormal variance with pedigree 0.0726, pedigree (2,4,5,5,3)
  This flow is weighted averages using the exchanges in the corresponding regional data.
  properties: dry mass 1 kg, wet mass 1 kg
- tap water: 0.00579755, 0.0291428, 0.0108179, 9.75079e-5, 0.00380313, 0.146191, 0.0419969 kg (7 suppliers, which the file names only by identifier); sum of these 0.237847 kg; lognormal variance with pedigree 0.0433, pedigree (2,2,5,5,1)
  This flow is weighted averages using the exchanges in the corresponding regional data.
  properties: carbon content, fossil 0.00178991, dry mass 0.000337476 kg, water content 2962.17, wet mass 1 kg
  note on carbon content, fossil: Bicarbonate content is 2.93 mol/m3. CO2 content is 0.1 mol/m3 (ecoinvent v2.2 report 8, Tab 93.1).
- waste gypsum: -0.242404 kg; lognormal variance with pedigree 0.0053, pedigree (2,2,3,5,1)
  production volume
    Calculated based on the production volume of the reference product.
  properties: dry mass 0.806 kg, water content 0.240695, wet mass 1 kg

## Inputs from nature
- Occupation, construction site [natural resource, land]: 0.43115 m2*year; lognormal variance with pedigree 0.0827, pedigree (2,2,5,5,1)
  This flow is weighted averages using the exchanges in the corresponding regional data.
- Occupation, industrial area [natural resource, land]: 4.57943e-5 m2*year; lognormal variance with pedigree 0.4006, pedigree (2,5,5,5,5)
  This flow is weighted averages using the exchanges in the corresponding regional data.
- Transformation, from industrial area [natural resource, land]: 0.000458319 m2; lognormal variance with pedigree 0.2606, pedigree (2,5,5,5,4)
  This flow is weighted averages using the exchanges in the corresponding regional data.
- Transformation, from pasture, man made [natural resource, land]: 0.000276724 m2; lognormal variance with pedigree 0.408, pedigree (4,5,5,5,5)
  This flow is weighted averages using the exchanges in the corresponding regional data.
- Transformation, from unspecified [natural resource, land]: 3.58553e-6 m2; lognormal variance with pedigree 0.408, pedigree (4,5,5,5,5)
  This flow is weighted averages using the exchanges in the corresponding regional data.
- Transformation, to industrial area [natural resource, land]: 0.000439387 m2; lognormal variance with pedigree 0.408, pedigree (4,5,5,5,5)
  This flow is weighted averages using the exchanges in the corresponding regional data.
- Transformation, to pasture, man made [natural resource, land]: 3.11635e-6 m2; lognormal variance with pedigree 0.408, pedigree (4,5,5,5,5)
  This flow is weighted averages using the exchanges in the corresponding regional data.
- Transformation, to unspecified [natural resource, land]: 0.000296479 m2; lognormal variance with pedigree 0.408, pedigree (4,5,5,5,5)
  This flow is weighted averages using the exchanges in the corresponding regional data.
- Water, cooling, unspecified natural origin [natural resource, in water]: 0.121311 m3; lognormal variance with pedigree 0.0532, pedigree (2,3,5,5,1)
  This flow is weighted averages using the exchanges in the corresponding regional data.
- Water, river [natural resource, in water]: 0.000252428 m3; lognormal variance with pedigree 0.0433, pedigree (2,2,5,5,1)
  This flow is weighted averages using the exchanges in the corresponding regional data.
- Water, well, in ground [natural resource, in water]: 0.00487986 m3; lognormal variance with pedigree 0.0546, pedigree (3,3,5,5,1)
  This flow is weighted averages using the exchanges in the corresponding regional data.

## Emissions to nature
- Carbon dioxide, fossil [air, non-urban air or from high stacks]: 0.010048 kg; lognormal variance with pedigree 0.0726, pedigree (3,3,5,5,3)
  This flow is weighted averages using the exchanges in the corresponding regional data.
- Fluorine [air, urban air close to ground]: 1.12089e-5 kg; lognormal variance with pedigree 0.0827, pedigree (2,2,5,5,1)
  This flow is weighted averages using the exchanges in the corresponding regional data.
- Hydrogen fluoride [air, non-urban air or from high stacks]: 4.75626e-5 kg; lognormal variance with pedigree 0.4006, pedigree (2,5,5,5,5)
  This flow is weighted averages using the exchanges in the corresponding regional data.
- Lead-210 [air, non-urban air or from high stacks]: 0.000268004 kBq; lognormal variance with pedigree 0.566, pedigree (3,4,5,5,5)
  This flow is weighted averages using the exchanges in the corresponding regional data.
- Particulate Matter, < 2.5 um [air, non-urban air or from high stacks]: 0.000108421 kg; lognormal variance with pedigree 0.4406, pedigree (2,5,5,5,4)
  This flow is weighted averages using the exchanges in the corresponding regional data.
- Particulate Matter, > 10 um [air, non-urban air or from high stacks]: 0.000135527 kg; lognormal variance with pedigree 0.1806, pedigree (2,5,5,5,4)
  This flow is weighted averages using the exchanges in the corresponding regional data.
- Particulate Matter, > 2.5 um and < 10um [air, non-urban air or from high stacks]: 0.000153597 kg; lognormal variance with pedigree 0.2606, pedigree (2,5,5,5,4)
  This flow is weighted averages using the exchanges in the corresponding regional data.
- Particulate Matter, > 2.5 um and < 10um [air, urban air close to ground]: 5.73203e-5 kg; lognormal variance with pedigree 0.1627, pedigree (2,2,5,5,1)
  This flow is weighted averages using the exchanges in the corresponding regional data.
- Polonium-210 [air, non-urban air or from high stacks]: 0.000468486 kBq; lognormal variance with pedigree 0.566, pedigree (3,4,5,5,5)
  This flow is weighted averages using the exchanges in the corresponding regional data.
- Potassium-40 [air, non-urban air or from high stacks]: 2.68004e-5 kBq; lognormal variance with pedigree 0.566, pedigree (3,4,5,5,5)
  This flow is weighted averages using the exchanges in the corresponding regional data.
- Radium-226 [air, non-urban air or from high stacks]: 0.000301267 kBq; lognormal variance with pedigree 0.566, pedigree (3,4,5,5,5)
  This flow is weighted averages using the exchanges in the corresponding regional data.
- Radon-222 [air, non-urban air or from high stacks]: 2.74602 kBq; lognormal variance with pedigree 0.566, pedigree (3,4,5,5,5)
  This flow is weighted averages using the exchanges in the corresponding regional data.
- Silicon tetrafluoride [air, non-urban air or from high stacks]: 3.11635e-6 kg; lognormal variance with pedigree 0.408, pedigree (4,5,5,5,5)
  This flow is weighted averages using the exchanges in the corresponding regional data.
- Thorium-228 [air, non-urban air or from high stacks]: 6.68969e-6 kBq; lognormal variance with pedigree 0.566, pedigree (3,4,5,5,5)
  This flow is weighted averages using the exchanges in the corresponding regional data.
- Uranium-238 [air, non-urban air or from high stacks]: 2.33746e-5 kBq; lognormal variance with pedigree 0.566, pedigree (3,4,5,5,5)
  This flow is weighted averages using the exchanges in the corresponding regional data.
- Water [air, unspecified]: 0.0490143 m3; lognormal variance with pedigree 0.0827, pedigree (2,2,5,5,1)
  This flow is weighted averages using the exchanges in the corresponding regional data.
- Arsenic ion [water, ground-]: 1.53353e-10 kg; lognormal variance with pedigree 0.706, pedigree (3,4,5,5,1)
  This flow is weighted averages using the exchanges in the corresponding regional data.
- Arsenic ion [water, ocean]: 4.14469e-7 kg; lognormal variance with pedigree 0.716, pedigree (3,4,5,5,1)
  This flow is weighted averages using the exchanges in the corresponding regional data.
- Cadmium II [water, ground-]: 2.40116e-10 kg; lognormal variance with pedigree 0.706, pedigree (3,4,5,5,1)
  This flow is weighted averages using the exchanges in the corresponding regional data.
- Cadmium II [water, ocean]: 8.12915e-7 kg; lognormal variance with pedigree 0.716, pedigree (3,4,5,5,1)
  This flow is weighted averages using the exchanges in the corresponding regional data.
- Calcium II [water, ground-]: 4.06918e-5 kg; lognormal variance with pedigree 0.696, pedigree (3,4,5,5,1)
  This flow is weighted averages using the exchanges in the corresponding regional data.
- Calcium II [water, ocean]: 0.0746516 kg; lognormal variance with pedigree 0.696, pedigree (3,4,5,5,1)
  This flow is weighted averages using the exchanges in the corresponding regional data.
- Chromium III [water, ground-]: 6.14806e-10 kg; lognormal variance with pedigree 0.706, pedigree (3,4,5,5,1)
  This flow is weighted averages using the exchanges in the corresponding regional data.
- Chromium III [water, ocean]: 4.05861e-6 kg; lognormal variance with pedigree 0.716, pedigree (3,4,5,5,1)
  This flow is weighted averages using the exchanges in the corresponding regional data.
- Copper ion [water, ground-]: 2.33446e-10 kg; lognormal variance with pedigree 0.706, pedigree (3,4,5,5,1)
  This flow is weighted averages using the exchanges in the corresponding regional data.
- Copper ion [water, ocean]: 5.24171e-7 kg; lognormal variance with pedigree 0.716, pedigree (3,4,5,5,1)
  This flow is weighted averages using the exchanges in the corresponding regional data.
- Fluoride [water, ground-]: 2.84873e-6 kg; lognormal variance with pedigree 0.748, pedigree (4,5,5,5,4)
  This flow is weighted averages using the exchanges in the corresponding regional data.
- Fluoride [water, ocean]: 0.00493558 kg; lognormal variance with pedigree 0.106, pedigree (3,4,5,5,1)
  This flow is weighted averages using the exchanges in the corresponding regional data.
- Fluoride [water, surface water]: 3.78186e-5 kg; lognormal variance with pedigree 0.6927, pedigree (2,2,5,5,1)
  This flow is weighted averages using the exchanges in the corresponding regional data.
- Lead II [water, ground-]: 1.274e-9 kg; lognormal variance with pedigree 0.706, pedigree (3,4,5,5,1)
  This flow is weighted averages using the exchanges in the corresponding regional data.
- Lead II [water, ocean]: 2.19843e-7 kg; lognormal variance with pedigree 0.716, pedigree (3,4,5,5,1)
  This flow is weighted averages using the exchanges in the corresponding regional data.
- Lead-210 [water, ground-]: 0.000995623 kBq; lognormal variance with pedigree 0.816, pedigree (3,4,5,5,5)
  This flow is weighted averages using the exchanges in the corresponding regional data.
- Lead-210 [water, ocean]: 0.00957009 kBq; lognormal variance with pedigree 0.816, pedigree (3,4,5,5,5)
  This flow is weighted averages using the exchanges in the corresponding regional data.
- Manganese II [water, ground-]: 3.04372e-9 kg; lognormal variance with pedigree 0.706, pedigree (3,4,5,5,1)
  This flow is weighted averages using the exchanges in the corresponding regional data.
- Manganese II [water, ocean]: 6.34752e-7 kg; lognormal variance with pedigree 0.716, pedigree (3,4,5,5,1)
  This flow is weighted averages using the exchanges in the corresponding regional data.
- Nickel II [water, ground-]: 1.10427e-9 kg; lognormal variance with pedigree 0.706, pedigree (3,4,5,5,1)
  This flow is weighted averages using the exchanges in the corresponding regional data.
- Nickel II [water, ocean]: 2.72158e-6 kg; lognormal variance with pedigree 0.716, pedigree (3,4,5,5,1)
  This flow is weighted averages using the exchanges in the corresponding regional data.
- Phosphate [water, ground-]: 2.51923e-6 kg; lognormal variance with pedigree 0.096, pedigree (3,4,5,5,1)
  This flow is weighted averages using the exchanges in the corresponding regional data.
- Phosphate [water, ocean]: 0.0032802 kg; lognormal variance with pedigree 0.106, pedigree (3,4,5,5,1)
  This flow is weighted averages using the exchanges in the corresponding regional data.
- Polonium-210 [water, ground-]: 0.00151501 kBq; lognormal variance with pedigree 0.816, pedigree (3,4,5,5,5)
  This flow is weighted averages using the exchanges in the corresponding regional data.
- Polonium-210 [water, ocean]: 0.296729 kBq; lognormal variance with pedigree 0.816, pedigree (3,4,5,5,5)
  This flow is weighted averages using the exchanges in the corresponding regional data.
- Potassium-40 [water, ground-]: 0.000120338 kBq; lognormal variance with pedigree 0.816, pedigree (3,4,5,5,5)
  This flow is weighted averages using the exchanges in the corresponding regional data.
- Potassium-40 [water, ocean]: 0.0235041 kBq; lognormal variance with pedigree 0.816, pedigree (3,4,5,5,5)
  This flow is weighted averages using the exchanges in the corresponding regional data.
- Radium-226 [water, ground-]: 0.00111678 kBq; lognormal variance with pedigree 0.816, pedigree (3,4,5,5,5)
  This flow is weighted averages using the exchanges in the corresponding regional data.
- Radium-226 [water, ocean]: 0.218948 kBq; lognormal variance with pedigree 0.816, pedigree (3,4,5,5,5)
  This flow is weighted averages using the exchanges in the corresponding regional data.
- Sulfate [water, ground-]: 9.17623e-5 kg; lognormal variance with pedigree 0.096, pedigree (3,4,5,5,1)
  This flow is weighted averages using the exchanges in the corresponding regional data.
- Sulfate [water, ocean]: 0.147953 kg; lognormal variance with pedigree 0.106, pedigree (3,4,5,5,1)
  This flow is weighted averages using the exchanges in the corresponding regional data.
- Thorium-228 [water, ground-]: 1.22066e-5 kBq; lognormal variance with pedigree 0.816, pedigree (3,4,5,5,5)
  This flow is weighted averages using the exchanges in the corresponding regional data.
- Thorium-228 [water, ocean]: 0.000118008 kBq; lognormal variance with pedigree 0.816, pedigree (3,4,5,5,5)
  This flow is weighted averages using the exchanges in the corresponding regional data.
- Uranium-238 [water, ground-]: 0.000510796 kBq; lognormal variance with pedigree 0.816, pedigree (3,4,5,5,5)
  This flow is weighted averages using the exchanges in the corresponding regional data.
- Uranium-238 [water, ocean]: 0.099765 kBq; lognormal variance with pedigree 0.816, pedigree (3,4,5,5,5)
  This flow is weighted averages using the exchanges in the corresponding regional data.
- Water [water, unspecified]: 0.0776952 m3; lognormal variance with pedigree 0.0827, pedigree (2,2,5,5,1)
  This flow is weighted averages using the exchanges in the corresponding regional data.
- Zinc II [water, ground-]: 6.72342e-10 kg; lognormal variance with pedigree 0.706, pedigree (3,4,5,5,1)
  This flow is weighted averages using the exchanges in the corresponding regional data.
- Zinc II [water, ocean]: 2.94994e-6 kg; lognormal variance with pedigree 0.716, pedigree (3,4,5,5,1)
  This flow is weighted averages using the exchanges in the corresponding regional data.

## Sampling procedure
Production of phosphoric acid assessed mainly with data from one site in Morocco (capacity about 1.3 Mt P2O5 per year). It was was assumed that the data cover about 30-50% of the Moroccan production. The total amount of fluosilic acid produced is not known. The production was assessed with weak data from one source. Therefore no representativity of the data can be given for fluosilic acid production.

## Extrapolations
This dataset was built as a weighted average of regional datasets of the same activityName. Weights are based on production volumes.
US: production volume = 2.09e+10 kg/year, weight = 0.8231
RER: production volume = 2.45e+09 kg/year, weight = 0.09649
MA: production volume = 2.04e+09 kg/year, weight = 0.08038
