# treatment of used liquid crystal display module, municipal waste incineration

Dataset: EcoSpold 2, unit process
Geography: RoW
Time period: 2006-01-01 to 2022-12-31
Technology level: current
Classification: ISIC rev.4 ecoinvent: 3821:Treatment and disposal of non-hazardous waste
Synonyms: Siedlungsabfallverbrennung; municipal waste incineration; Kehrichtverbrennung
Scenario: Business-as-Usual
System model: Substitution, consequential, long-term
Share of production covered: 1.8 %
Generated by: Gabor Doka
Published in: Doka G. 2013
Database: ecoinvent
isCopyrightProtected: true

## General comment
This dataset represents the activity of waste disposal of liquid crystal display in a municipal solid waste incinerator (MSWI) // Recommended use of this dataset: Only for incineration of LCD modules (mostly glass and inorganics, some electronic components, copper and plastics) generated in the recycling (mechanical treatment) of LCD screens (Liquid Crystal Display screen residue) // Inventoried waste contains 0.87% Plastics from electronic consumer goods; 0.87% Plastics from electronic industrial goods; 82% Glass; 0.87% wiring copper; 0.83% liquid crystals; 0.12% ITO coating; 14.5% electronic goods; . // Waste composition (wet, in ppm): upper heating value 2.835 MJ/kg; lower heating value 2.551 MJ/kg; H2O 40144; O 430500; H 7674.6; C 63365; S 102.58; N 1270.5; P 46.362; B 0.0082045; Cl 1519.4; Br 95.711; F 11.587; I n.a.; Ag 30.387; As 0.1305; Ba 8.0249; Cd 10.593; Co 0.51291; Cr 317.5; Cu 26895; Hg 0.16101; Mn 71.044; Mo 0.56082; Ni 1905; Pb 4347.4; Sb 112.38; Se 0.034097; Sn 2351.8; V 0.01305; Zn 2573.8; Be 0.0081182; Sc n.a.; Sr 1.4369; Ti 77.9; Tl 0.0064946; W n.a.; Si 294410; Fe 5671.6; Ca 60879; Al 900.8; K 965.57; Mg 2.0446; Na 52850; // Share of carbon in waste that is biogenic 0%. // Share of metals in waste not oxidised and bulk-recyclable (exclude very small or thin parts) Iron: 99.52%; Alu: 57.22%; Copper: 99.77%. // One kg of this waste produces 0.9804 kg of slag and 0.01217 kg of residues, which are landfilled. Additional solidification with 0.004869 kg of cement. // Net energy production: 0.24MJ/kg electric energy and 0.64MJ/kg thermal energy. // Recovery of metal scrap to recycling: 3.1738g iron scrap, 0.131g aluminium scrap, 7.6938g copper scrap.

## Included activities start
waste incineration from waste reception gate and delivery into waste bunker at incinerator plant site (without transports to the incinerator)

## Included activities end
Waste-specific short-term emissions to water from leachate. Long-term emissions from landfill to ground water.

## Geography
Specific to the technology mix encountered in Switzerland in 2010. Well applicable to modern incineration practices in Europe, North America or Japan.

## Technology
average Swiss MSWI plants in 2010 (grate incinerators) with electrostatic precipitator for fly ash (ESP), wet flue gas scrubber and 25% SNCR , 42.77% SCR-high dust , 32.68% SCR-low dust -DeNOx facilities and 0% without Denox (weighted according to mass of burnt waste, representing Swiss average). Efficiency of iron scrap separation from slag : 58%. Efficiency of non-ferrous scrap separation from slag : 31%. Gross electric efficiency technology mix 15.84% and Gross thermal efficiency technology mix 28.51%

## Time period
Waste composition as given in literature reference, theoretical data or other source. Transfer coefficients for modern MSWI.

## Reference product
- used liquid crystal display module: -1 kg; By-product classification Waste; CPC 39: Wastes or scraps
  Main reference product of this activity (supply of disposal service).
  production volume 2.5592e8 kg
    based on estimate on MSW in WTE globally and estimate of share of WEEE residues in Swiss MSW based on unqualified estimate waste LCD screens in CH and rate of this LCD module waste per LCD device (from Hischier et al. 2007-V)
  property price 0 EUR2005
    Waste products are assigned a price of zero as they are assumed to require further treatment.
  properties: carbon allocation 0.327914 kg, carbon content 0.327914, carbon content, fossil 0.327872, carbon content, non-fossil 4.20542e-5, dry mass 1 kg, water content 0, water in wet mass 0 kg, wet mass 1 kg

## Inputs from technosphere
- aluminium scrap, post-consumer, prepared for melting: -0.000131 kg; lognormal variance with pedigree 0.68123, pedigree (1,1,1,1,1)
  Aluminium scrap recovered from this waste.
  Uncertainty: uncertainty calculated from uncertainty in waste composition, uncertainty of share of recyclable metal, uncertainty of transfer coefficient to bottom ash, uncertainty of the efficiency of scrap removal in MSWI plant.
  production volume
    calculated in proportion to reference product waste input to incinerator
  properties: dry mass 1 kg, price 0.806 EUR2005, wet mass 1 kg
- ammonia, anhydrous, liquid: 5.5705e-6, 1.13337e-6, 1.08135e-5, 4.16533e-5, 5.06658e-6, 3.35514e-6, 0.00011986, 1.10371e-5 kg (8 suppliers, which the file names only by identifier); sum of these 0.00019849 kg; lognormal variance with pedigree 1.0282, pedigree (1,1,4,1,1)
  Input to DeNOx stage (100% NH3).
  Uncertainty: uncertainty calculated from uncertainty in average DeNOx input, uncertainty in the share of thermal NOx, uncertainty of nitrogen content in average municipal waste and the uncertainty in nitrogen content in *this* waste.
  properties: dry mass 1 kg, wet mass 1 kg
- cement, unspecified: 6.40095e-5, 0.000105037, 0.000398903, 4.96032e-6, 9.85864e-6, 1.50722e-5, 0.00401717, 1.25211e-5, 0.000241674 kg (9 suppliers, which the file names only by identifier); sum of these 0.0048692 kg; lognormal variance with pedigree 0.076738, pedigree (1,1,4,1,1)
  Cement required for solidification of landfilled residual material.
  Uncertainty: Uncertainty calculated from uncertainty of the waste composition of this waste, of transfer coefficients in the incinerator and of the solidification recipe.
  properties: dry mass 1 kg, wet mass 1 kg
- chemical, inorganic: 5.007e-5 kg; lognormal variance with pedigree 0.42719, pedigree (1,1,4,1,1)
  Auxilliary inputs for the wastewater treatment stage of the incinerator plant. Proxy for Polyelectrolyte.
  Uncertainty: uncertainty calculated from uncertainty in average Polyelectrolyte input, of transfer coefficients in the incinerator, and the uncertainty of the waste composition of this waste
  properties: carbon content, fossil 0.003, dry mass 1 kg, wet mass 1 kg
- chemical, organic: 5.4533e-6 kg; lognormal variance with pedigree 1.1285, pedigree (1,1,4,1,1)
  Auxilliary inputs for the wastewater treatment stage of the incinerator plant. Proxy for (pure) Trisodium-trimercapto-s-triazine (CAS 17766-26-6), used as 15% diluted solution, aka TMT15.
  Uncertainty: uncertainty calculated from uncertainty in average TMT15 input, of transfer coefficients in the incinerator, and the uncertainty of the waste composition of this waste
  properties: carbon content, fossil 0.628, dry mass 1 kg, heating value, net 19.03 MJ, wet mass 1 kg
- chromium oxide, flakes: 2.538e-7 kg; lognormal variance with pedigree 1.4076, pedigree (1,1,4,1,1)
  Input to DeNOx stage.
  Uncertainty: uncertainty calculated from uncertainty in average DeNOx input, uncertainty in the share of thermal NOx, uncertainty of nitrogen content in average municipal waste and the uncertainty in nitrogen content in *this* waste.
  properties: dry mass 1 kg, wet mass 1 kg
- copper scrap, sorted, pressed: -0.0076938 kg; lognormal variance with pedigree 0.26248, pedigree (1,1,1,1,1)
  Copper scrap recovered from this waste.
  Uncertainty: uncertainty calculated from uncertainty in waste composition, uncertainty of share of recyclable metal, uncertainty of transfer coefficient to bottom ash, uncertainty of the efficiency of scrap removal in MSWI plant.
  production volume
    calculated in proportion to reference product waste input to incinerator
  properties: dry mass 1 kg, price 2.84 EUR2005, wet mass 1 kg
- electricity, for reuse in municipal waste incineration only: -0.0026726, -0.0026726, -0.0026726, -0.0026726, -0.0026726, -0.0026726, -0.0026726, -0.0026726, -0.0026726, -0.0026726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 kWh (25 suppliers, which the file names only by identifier); sum of these -0.066815 kWh; lognormal variance with pedigree 0.044524, pedigree (1,1,1,1,1)
  Net electricity generated from this waste and used in internal MSWI plant energy redistribution.
  Uncertainty: uncertainty is calculated from uncertainties in waste composition and uncertainties in energy efficiency and the uncertainty in internal energy demand
  production volume
    calculated in proportion to reference product waste input to incinerator
  properties: exergy 3.6 MJ, price 0.1 EUR2005
  note on exergy: This exergy property is based on the exergy content of the product.
- heat, district or industrial, natural gas: 0.00356286, 0.0100747, 0.0234805 MJ (3 suppliers, which the file names only by identifier); sum of these 0.037118 MJ; lognormal variance with pedigree 1.0282, pedigree (1,1,4,1,1)
  Input to DeNOx stage, to heat up flue gas in low-dust SCR.
  Uncertainty: uncertainty calculated from uncertainty in average DeNOx input, uncertainty in the share of thermal NOx, uncertainty of nitrogen content in average municipal waste and the uncertainty in nitrogen content in *this* waste.
  properties: heating value, net 1 MJ
- heat, for reuse in municipal waste incineration only: -0.0257648, -0.0257648, -0.0257648, -0.0257648, -0.0257648, -0.0257648, -0.0257648, -0.0257648, -0.0257648, -0.0257648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 MJ (25 suppliers, which the file names only by identifier); sum of these -0.64412 MJ; lognormal variance with pedigree 0.00012595, pedigree (1,1,1,1,1)
  (same comment as for electricity, for reuse in municipal waste incineration only)
  production volume
    calculated in proportion to reference product waste input to incinerator
  properties: exergy 0.1842 MJ, price 0.0106 EUR2005
- hydrochloric acid, without water, in 30% solution state: 1.3161e-5 kg; lognormal variance with pedigree 0.42719, pedigree (1,1,4,1,1)
  Auxilliary inputs for the wastewater treatment stage of the incinerator plant.
  Uncertainty: uncertainty calculated from uncertainty in average HCl input, of transfer coefficients in the incinerator, and the uncertainty of the waste composition of this waste
  properties: dry mass 1 kg, heating value, net 3.32 MJ, wet mass 1 kg
- iron (III) chloride, without water, in 40% solution state: 0.00016332 kg; lognormal variance with pedigree 0.19164, pedigree (1,1,4,1,1)
  Auxilliary inputs for the wastewater treatment stage of the incinerator plant.
  Uncertainty: uncertainty calculated from uncertainty in average FeCl3 input, of transfer coefficients in the incinerator, and the uncertainty of the waste composition of this waste
  properties: dry mass 1 kg, wet mass 1 kg
- iron scrap, sorted, pressed: -0.0031738 kg; lognormal variance with pedigree 0.44548, pedigree (1,1,1,1,1)
  Iron scrap recovered from this waste.
  Uncertainty: uncertainty calculated from uncertainty in waste composition, uncertainty of share of recyclable metal, uncertainty of transfer coefficient to bottom ash, uncertainty of the efficiency of scrap removal in MSWI plant.
  production volume
    calculated in proportion to reference product waste input to incinerator
  properties: dry mass 1 kg, price 0.175 EUR2005, wet mass 1 kg
- municipal waste incineration facility: 2.5e-10 unit
  Demands per kilogram waste.
- process-specific burdens, residual material landfill: 0.00344343, 0.00872957 kg (2 suppliers, which the file names only by identifier); sum of these 0.012173 kg; lognormal variance with pedigree 0.067654, pedigree (1,1,4,1,1)
  Mass-specific expenditures required for landfilling of incineration residues.
  Uncertainty: uncertainty is calculated from uncertainties in waste composition and transfer coefficients in incinerator
- process-specific burdens, slag landfill: 0.277288, 0.702962 kg (2 suppliers, which the file names only by identifier); sum of these 0.98025 kg; lognormal variance with pedigree 0.019504, pedigree (1,1,4,1,1)
  Mass-specific expenditures required for landfilling of bottom ash.
  Uncertainty: uncertainty is calculated from uncertainties in waste composition and transfer coefficients in incinerator
- quicklime, milled, packed: 0.00073856 kg; lognormal variance with pedigree 0.5899, pedigree (1,1,4,1,1)
  Auxilliary inputs for the flue gas treatment stage of the incinerator plant.
  Uncertainty: uncertainty calculated from uncertainty in average CaO input, of transfer coefficients in the incinerator, and the uncertainty of the waste composition of this waste
  properties: dry mass 0.99 kg, water content 0.010101, wet mass 1 kg
- residual material landfill: 2.536e-11 unit; lognormal variance with pedigree 0.067654, pedigree (1,1,4,1,1)
  Landfill infrastructure required for landfilling of incineration residues.
  Uncertainty: uncertainty is calculated from uncertainties in waste composition and transfer coefficients in incinerator
- slag landfill: 1.7427e-9 unit; lognormal variance with pedigree 0.019504, pedigree (1,1,4,1,1)
  Landfill infrastructure required for landfilling of bottom ash.
  Uncertainty: uncertainty is calculated from uncertainties in waste composition and transfer coefficients in incinerator
- sodium hydroxide, without water, in 50% solution state: 0.00017662 kg; lognormal variance with pedigree 0.43864, pedigree (1,1,4,1,1)
  Auxilliary inputs for the flue gas treatment stage of the incinerator plant.
  Uncertainty: uncertainty calculated from uncertainty in average NaOH input, of transfer coefficients in the incinerator, and the uncertainty of the waste composition of this waste
  properties: dry mass 1 kg, heating value, net 3.03 MJ, wet mass 1 kg
- titanium dioxide: 1.2436e-5 kg; lognormal variance with pedigree 1.4076, pedigree (1,1,4,1,1)
  Input to DeNOx stage (TiO2 catalyst carrier)
  Uncertainty: uncertainty calculated from uncertainty in average DeNOx input, uncertainty in the share of thermal NOx, uncertainty of nitrogen content in average municipal waste and the uncertainty in nitrogen content in *this* waste.
  properties: dry mass 1 kg, wet mass 1 kg
- transport, freight, lorry, unspecified: 0.00071126, 0.00454296, 0.0344428 metric ton*km (3 suppliers, which the file names only by identifier); sum of these 0.039697 metric ton*km; lognormal variance with pedigree 0.019228, pedigree (1,1,4,1,1)
  Transport services to transport incineration residues to landfills.
  Uncertainty: uncertainty calculated from uncertainty of the waste composition of this waste, uncertainty of transfer coefficients and the uncertainty in generic transportation distances
- waste cement, hydrated: -0.00344343, -0.00872957 kg (2 suppliers, which the file names only by identifier); sum of these -0.012173 kg; lognormal variance with pedigree 0.068738, pedigree (1,1,1,1,1)
  Hydrated cement output for solidification of landfilled residual material.
  Uncertainty: Uncertainty calculated from uncertainty of the waste composition of this waste and transfer coefficients in the incinerator and of the solidification recipe.
  production volume
    calculated in proportion to reference product waste input to incinerator
  properties: dry mass 1 kg, wet mass 1 kg
- water, decarbonised: 0.0561708, 0.00715283, 0.0887196, 0.00050196, 0.00909251, 0.0137166, 0.00535242, 0.0027652, 0.104515, 0.0166619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 kg (12 suppliers, which the file names only by identifier); sum of these 0.31926 kg; lognormal variance with pedigree 0.19164, pedigree (1,1,4,1,1)
  Incinerator process water used in flue gas scrubber stage.
  Uncertainty: uncertainty calculated from uncertainty in average water input, and the uncertainty of the waste composition of this waste
  properties: wet mass 1 kg

## Inputs from nature
- Oxygen [natural resource, in air]: 0.61512 kg; lognormal variance with pedigree 0.034453, pedigree (1,1,4,1,1)
  Oxygen from ambient air needed to combust and oxidise this waste. Net demand, i.e. without O2 leaving the plant in flue gas uncombusted.
  Uncertainty: uncertainty is calculated from uncertainties in waste composition and transfer coefficients to flue gas and soild residues in incinerator

## Emissions to nature
- Aluminium III [air, urban air close to ground]: 7.3443e-10 kg; lognormal variance with pedigree 0.75258, pedigree (1,1,4,1,1)
  Emission to air from waste composition and transfer coefficients.
  Uncertainty: uncertainty is calculated from uncertainties in waste composition and transfer coefficients in incinerator
- Ammonia [air, urban air close to ground]: 2.3338e-7 kg; lognormal variance with pedigree 1.0879, pedigree (1,1,4,1,1)
  Nitrogen species emitted to air after DeNOx stage.
  Uncertainty: uncertainty calculated from uncertainty in average N-emissions and uncertainty in the share of thermal NOx and the uncertainty in nitrogen content in *this* waste.
- Antimony ion [air, urban air close to ground]: 9.0024e-11 kg; lognormal variance with pedigree 1.024, pedigree (1,1,4,1,1)
  (same comment as for Aluminium III)
- Arsenic ion [air, urban air close to ground]: 1.0222e-9 kg; lognormal variance with pedigree 1.8463, pedigree (1,1,4,1,1)
  (same comment as for Aluminium III)
- Barium II [air, urban air close to ground]: 3.1498e-8 kg; lognormal variance with pedigree 1.3172, pedigree (1,1,4,1,1)
  (same comment as for Aluminium III)
- Benzene [air, urban air close to ground]: 4.7291e-8 kg; lognormal variance with pedigree 0.19458, pedigree (1,1,4,1,1)
  Incomplete combustion product emitted to air.
  Uncertainty: uncertainty calculated from uncertainty in average operation emissions, and the uncertainty of the flue gas volume from this waste.
- Benzene, hexachloro- [air, urban air close to ground]: 9.8883e-11 kg; lognormal variance with pedigree 0.19458, pedigree (1,1,4,1,1)
  (same comment as for Benzene)
- Benzene, pentachloro- [air, urban air close to ground]: 2.4985e-10 kg; lognormal variance with pedigree 0.19458, pedigree (1,1,4,1,1)
  (same comment as for Benzene)
- Benzo(a)pyrene [air, urban air close to ground]: 1.0524e-12 kg; lognormal variance with pedigree 0.6141, pedigree (1,1,4,1,1)
  (same comment as for Benzene)
- Bromine [air, urban air close to ground]: 4.7808e-8 kg; lognormal variance with pedigree 1.00191, pedigree (1,1,4,1,1)
  (same comment as for Aluminium III)
- Cadmium II [air, urban air close to ground]: 5.3991e-9 kg; lognormal variance with pedigree 1.2954, pedigree (1,1,4,1,1)
  (same comment as for Aluminium III)
- Calcium [air, urban air close to ground]: 9.3693e-6 kg; lognormal variance with pedigree 0.20575, pedigree (1,1,4,1,1)
  (same comment as for Aluminium III)
- Carbon dioxide, fossil [air, urban air close to ground]: 0.23081 kg; lognormal variance with pedigree 0.17198, pedigree (1,1,4,1,1)
  (same comment as for Aluminium III)
- Carbon monoxide, fossil [air, urban air close to ground]: 8.0389e-5 kg; lognormal variance with pedigree 1.077, pedigree (1,1,4,1,1)
  (same comment as for Benzene)
- Chromium III [air, urban air close to ground]: 5.9917e-8 kg; lognormal variance with pedigree 0.84759, pedigree (1,1,4,1,1)
  (same comment as for Aluminium III)
- Cobalt II [air, urban air close to ground]: 9.3282e-10 kg; lognormal variance with pedigree 1.6772, pedigree (1,1,4,1,1)
  (same comment as for Aluminium III)
- Copper ion [air, urban air close to ground]: 1.6659e-6 kg; lognormal variance with pedigree 0.29583, pedigree (1,1,4,1,1)
  (same comment as for Aluminium III)
- Cyanide [air, urban air close to ground]: 4.0711e-6 kg; lognormal variance with pedigree 1.4085, pedigree (1,1,4,1,1)
  (same comment as for Ammonia)
- Dinitrogen monoxide [air, urban air close to ground]: 1.8949e-5 kg; lognormal variance with pedigree 1.4085, pedigree (1,1,4,1,1)
  (same comment as for Ammonia)
- Dioxins, measured as 2,3,7,8-tetrachlorodibenzo-p-dioxin [air, urban air close to ground]: 9.4575e-14 kg; lognormal variance with pedigree 0.6141, pedigree (1,1,4,1,1)
  (same comment as for Benzene)
- Heat, waste [air, urban air close to ground]: 2.2326 MJ; lognormal variance with pedigree 0.00839424, pedigree (1,1,4,1,1)
  Waste heat generated from heating value of this waste plus any electricity required to process it.
  Uncertainty: uncertainty is calculated from uncertainties in waste composition and uncertainties in energy efficiency and the uncertainty in internal energy demand
- Hydrochloric acid [air, urban air close to ground]: 7.7544e-7 kg; lognormal variance with pedigree 0.63523, pedigree (1,1,4,1,1)
  (same comment as for Aluminium III)
- Hydrogen fluoride [air, urban air close to ground]: 7.8174e-8 kg; lognormal variance with pedigree 1.2675, pedigree (1,1,4,1,1)
  (same comment as for Aluminium III)
- Iron ion [air, urban air close to ground]: 1.0164e-8 kg; lognormal variance with pedigree 0.50931, pedigree (1,1,4,1,1)
  (same comment as for Aluminium III)
- Lead II [air, urban air close to ground]: 3.5555e-7 kg; lognormal variance with pedigree 0.5163, pedigree (1,1,4,1,1)
  (same comment as for Aluminium III)
- Magnesium [air, urban air close to ground]: 2.1566e-9 kg; lognormal variance with pedigree 1.5056, pedigree (1,1,4,1,1)
  (same comment as for Aluminium III)
- Manganese II [air, urban air close to ground]: 1.3568e-8 kg; lognormal variance with pedigree 1.046, pedigree (1,1,4,1,1)
  (same comment as for Aluminium III)
- Mercury II [air, urban air close to ground]: 4.5654e-9 kg; lognormal variance with pedigree 1.8183, pedigree (1,1,4,1,1)
  (same comment as for Aluminium III)
- Methane, fossil [air, urban air close to ground]: 7.0936e-7 kg; lognormal variance with pedigree 0.19458, pedigree (1,1,4,1,1)
  (same comment as for Benzene)
- Molybdenum VI [air, urban air close to ground]: 7.3792e-10 kg; lognormal variance with pedigree 1.6701, pedigree (1,1,4,1,1)
  (same comment as for Aluminium III)
- NMVOC, non-methane volatile organic compounds [air, urban air close to ground]: 2.1522e-6 kg; lognormal variance with pedigree 0.19458, pedigree (1,1,4,1,1)
  (same comment as for Benzene)
- Nickel II [air, urban air close to ground]: 2.393e-6 kg; lognormal variance with pedigree 0.60107, pedigree (1,1,4,1,1)
  (same comment as for Aluminium III)
- Nitrogen oxides [air, urban air close to ground]: 7.3904e-5 kg; lognormal variance with pedigree 1.0879, pedigree (1,1,4,1,1)
  Sum of fuel-Nox and thermal-NOx emitted to air after DeNOx stage.
  Uncertainty: uncertainty calculated from uncertainty in average N-emissions and uncertainty in the share of thermal NOx and the uncertainty in nitrogen content in *this* waste.
- Particulate Matter, < 2.5 um [air, urban air close to ground]: 5.6461e-6 kg; lognormal variance with pedigree 0.6141, pedigree (1,1,4,1,1)
  (same comment as for Benzene)
- Particulate Matter, > 2.5 um and < 10um [air, urban air close to ground]: 2.8373e-8 kg; lognormal variance with pedigree 0.33954, pedigree (1,1,4,1,1)
  (same comment as for Benzene)
- Phenol, pentachloro- [air, urban air close to ground]: 2.0594e-11 kg; lognormal variance with pedigree 0.19458, pedigree (1,1,4,1,1)
  (same comment as for Benzene)
- Phosphorus [air, urban air close to ground]: 4.7115e-8 kg; lognormal variance with pedigree 1.0902, pedigree (1,1,4,1,1)
  (same comment as for Aluminium III)
- Potassium I [air, urban air close to ground]: 4.7704e-6 kg; lognormal variance with pedigree 0.68004, pedigree (1,1,4,1,1)
  (same comment as for Aluminium III)
- Selenium IV [air, urban air close to ground]: 4.0677e-10 kg; lognormal variance with pedigree 1.9367, pedigree (1,1,4,1,1)
  (same comment as for Aluminium III)
- Silicon [air, urban air close to ground]: 9.4552e-11 kg; lognormal variance with pedigree 0.20007, pedigree (1,1,4,1,1)
  (same comment as for Aluminium III)
- Sodium [air, urban air close to ground]: 2.2281e-8 kg; lognormal variance with pedigree 0.27099, pedigree (1,1,4,1,1)
  (same comment as for Aluminium III)
- Strontium [air, urban air close to ground]: 1.4369e-10 kg; lognormal variance with pedigree 1.5631, pedigree (1,1,4,1,1)
  (same comment as for Aluminium III)
- Sulfur dioxide [air, urban air close to ground]: 1.0908e-6 kg; lognormal variance with pedigree 0.97853, pedigree (1,1,4,1,1)
  (same comment as for Aluminium III)
- Thallium I [air, urban air close to ground]: 6.4946e-12 kg; lognormal variance with pedigree 1.9506, pedigree (1,1,4,1,1)
  (same comment as for Aluminium III)
- Tin ion [air, urban air close to ground]: 1.4744e-9 kg; lognormal variance with pedigree 0.62967, pedigree (1,1,4,1,1)
  (same comment as for Aluminium III)
- Titanium ion [air, urban air close to ground]: 6.463e-8 kg; lognormal variance with pedigree 1.024, pedigree (1,1,4,1,1)
  (same comment as for Aluminium III)
- Toluene [air, urban air close to ground]: 9.4582e-8 kg; lognormal variance with pedigree 0.19458, pedigree (1,1,4,1,1)
  (same comment as for Benzene)
- Vanadium V [air, urban air close to ground]: 2.7678e-10 kg; lognormal variance with pedigree 1.9367, pedigree (1,1,4,1,1)
  (same comment as for Aluminium III)
- Water [air, urban air close to ground]: 0.00089007 m3; lognormal variance with pedigree 0.76459, pedigree (1,1,4,1,1)
  Water vapour from waste humidity, hydrogen oxidation and part of the process water.
  Uncertainty: Uncertainty calculated from uncertainty in waste composition, process water input and the uncertainty of fraction to air.
- Zinc II [air, urban air close to ground]: 1.723e-6 kg; lognormal variance with pedigree 0.56554, pedigree (1,1,4,1,1)
  (same comment as for Aluminium III)
- Aluminium III [water, ground-, long-term]: 0.00054441 kg; lognormal variance with pedigree 0.60237, pedigree (1,1,4,1,1)
  Long-term emissions from landfilling of incineration residues.
  Uncertainty: uncertainty is calculated from uncertainties in waste composition and transfer coefficients in incinerator and landfills.
- Aluminium III [water, surface water]: 9.5764e-8 kg; lognormal variance with pedigree 0.99745, pedigree (1,1,4,1,1)
  Emissions to water from waste composition and transfer coefficients in incinerator and landfills.
  Uncertainty: uncertainty is calculated from uncertainties in waste composition and transfer coefficients in incinerator and landfills
- Antimony ion [water, ground-, long-term]: 7.1467e-5 kg; lognormal variance with pedigree 0.92359, pedigree (1,1,4,1,1)
  (same comment as for Aluminium III)
- Antimony ion [water, surface water]: 3.8734e-5 kg; lognormal variance with pedigree 0.95757, pedigree (1,1,4,1,1)
  (same comment as for Aluminium III)
- Arsenic ion [water, ground-, long-term]: 3.9079e-8 kg; lognormal variance with pedigree 1.8389, pedigree (1,1,4,1,1)
  (same comment as for Aluminium III)
- Arsenic ion [water, surface water]: 9.0399e-8 kg; lognormal variance with pedigree 1.7143, pedigree (1,1,4,1,1)
  (same comment as for Aluminium III)
- BOD5, Biological Oxygen Demand [water, ground-, long-term]: 0.00015565 kg; lognormal variance with pedigree 0.10867, pedigree (1,1,4,1,1)
  (same comment as for Aluminium III)
- BOD5, Biological Oxygen Demand [water, surface water]: 7.3172e-5 kg; lognormal variance with pedigree 0.19314, pedigree (1,1,4,1,1)
  (same comment as for Aluminium III)
- Barium II [water, ground-, long-term]: 4.0415e-6 kg; lognormal variance with pedigree 2.5474, pedigree (1,1,4,1,1)
  (same comment as for Aluminium III)
- Barium II [water, surface water]: 1.0801e-9 kg; lognormal variance with pedigree 1.5559, pedigree (1,1,4,1,1)
  (same comment as for Aluminium III)
- Beryllium II [water, ground-, long-term]: 7.4195e-9 kg; lognormal variance with pedigree 1.8459, pedigree (1,1,4,1,1)
  (same comment as for Aluminium III)
- Beryllium II [water, surface water]: 5.0846e-12 kg; lognormal variance with pedigree 2.4407, pedigree (1,1,4,1,1)
  (same comment as for Aluminium III)
- Boron [water, ground-, long-term]: 6.977e-9 kg; lognormal variance with pedigree 1.737, pedigree (1,1,4,1,1)
  (same comment as for Aluminium III)
- Boron [water, surface water]: 6.4283e-11 kg; lognormal variance with pedigree 2.1393, pedigree (1,1,4,1,1)
  (same comment as for Aluminium III)
- Bromine [water, ground-, long-term]: 9.225e-6 kg; lognormal variance with pedigree 0.97845, pedigree (1,1,4,1,1)
  (same comment as for Aluminium III)
- Bromine [water, surface water]: 8.6438e-5 kg; lognormal variance with pedigree 0.46518, pedigree (1,1,4,1,1)
  (same comment as for Aluminium III)
- COD, Chemical Oxygen Demand [water, ground-, long-term]: 0.00047585 kg; lognormal variance with pedigree 0.10867, pedigree (1,1,4,1,1)
  (same comment as for Aluminium III)
- COD, Chemical Oxygen Demand [water, surface water]: 7.4124e-5 kg; lognormal variance with pedigree 0.18794, pedigree (1,1,4,1,1)
  (same comment as for Aluminium III)
- Cadmium II [water, ground-, long-term]: 7.7294e-7 kg; lognormal variance with pedigree 6.7229, pedigree (1,1,4,1,1)
  (same comment as for Aluminium III)
- Cadmium II [water, surface water]: 1.0152e-9 kg; lognormal variance with pedigree 1.058, pedigree (1,1,4,1,1)
  (same comment as for Aluminium III)
- Calcium II [water, ground-, long-term]: 0.060315 kg; lognormal variance with pedigree 0.17563, pedigree (1,1,4,1,1)
  (same comment as for Aluminium III)
- Calcium II [water, surface water]: 0.00027362 kg; lognormal variance with pedigree 0.61519, pedigree (1,1,4,1,1)
  (same comment as for Aluminium III)
- Chloride [water, ground-, long-term]: 0.00033675 kg; lognormal variance with pedigree 0.55212, pedigree (1,1,4,1,1)
  (same comment as for Aluminium III)
- Chloride [water, surface water]: 0.0011819 kg; lognormal variance with pedigree 0.41852, pedigree (1,1,4,1,1)
  (same comment as for Aluminium III)
- Chromium III [water, surface water]: 5.3279e-9 kg; lognormal variance with pedigree 0.86347, pedigree (1,1,4,1,1)
  (same comment as for Aluminium III)
- Chromium VI [water, ground-, long-term]: 7.923e-6 kg; lognormal variance with pedigree 3.2285, pedigree (1,1,4,1,1)
  (same comment as for Aluminium III)
- Chromium VI [water, surface water]: 1.9248e-6 kg; lognormal variance with pedigree 0.9054, pedigree (1,1,4,1,1)
  (same comment as for Aluminium III)
- Cobalt II [water, ground-, long-term]: 4.1781e-7 kg; lognormal variance with pedigree 1.5754, pedigree (1,1,4,1,1)
  (same comment as for Aluminium III)
- Cobalt II [water, surface water]: 9.2927e-11 kg; lognormal variance with pedigree 1.9338, pedigree (1,1,4,1,1)
  (same comment as for Aluminium III)
- Copper ion [water, ground-, long-term]: 0.017259 kg; lognormal variance with pedigree 0.25771, pedigree (1,1,4,1,1)
  (same comment as for Aluminium III)
- Copper ion [water, surface water]: 2.392e-6 kg; lognormal variance with pedigree 0.39747, pedigree (1,1,4,1,1)
  (same comment as for Aluminium III)
- DOC, Dissolved Organic Carbon [water, ground-, long-term]: 0.0001883 kg; lognormal variance with pedigree 0.10867, pedigree (1,1,4,1,1)
  (same comment as for Aluminium III)
- DOC, Dissolved Organic Carbon [water, surface water]: 3.237e-5 kg; lognormal variance with pedigree 0.18864, pedigree (1,1,4,1,1)
  (same comment as for Aluminium III)
- Fluoride [water, ground-, long-term]: 1.0389e-5 kg; lognormal variance with pedigree 0.75839, pedigree (1,1,4,1,1)
  (same comment as for Aluminium III)
- Fluoride [water, surface water]: 8.8598e-7 kg; lognormal variance with pedigree 0.81586, pedigree (1,1,4,1,1)
  (same comment as for Aluminium III)
- Heat, waste [water, surface water]: 0.52519 MJ; lognormal variance with pedigree 0.00839424, pedigree (1,1,4,1,1)
  (same comment as for Heat, waste)
- Iron ion [water, ground-, long-term]: 0.0012103 kg; lognormal variance with pedigree 0.9136, pedigree (1,1,4,1,1)
  (same comment as for Aluminium III)
- Iron ion [water, surface water]: 1.2254e-7 kg; lognormal variance with pedigree 0.49659, pedigree (1,1,4,1,1)
  (same comment as for Aluminium III)
- Lead II [water, ground-, long-term]: 0.0021183 kg; lognormal variance with pedigree 3.613, pedigree (1,1,4,1,1)
  (same comment as for Aluminium III)
- Lead II [water, surface water]: 4.134e-7 kg; lognormal variance with pedigree 0.42283, pedigree (1,1,4,1,1)
  (same comment as for Aluminium III)
- Magnesium [water, ground-, long-term]: 1.8107e-6 kg; lognormal variance with pedigree 1.4489, pedigree (1,1,4,1,1)
  (same comment as for Aluminium III)
- Magnesium [water, surface water]: 9.5401e-9 kg; lognormal variance with pedigree 1.5522, pedigree (1,1,4,1,1)
  (same comment as for Aluminium III)
- Manganese II [water, ground-, long-term]: 4.3828e-5 kg; lognormal variance with pedigree 2.0014, pedigree (1,1,4,1,1)
  (same comment as for Aluminium III)
- Manganese II [water, surface water]: 1.1059e-8 kg; lognormal variance with pedigree 0.87682, pedigree (1,1,4,1,1)
  (same comment as for Aluminium III)
- Mercury II [water, ground-, long-term]: 1.0255e-8 kg; lognormal variance with pedigree 3.3331, pedigree (1,1,4,1,1)
  (same comment as for Aluminium III)
- Mercury II [water, surface water]: 1.7487e-10 kg; lognormal variance with pedigree 1.3065, pedigree (1,1,4,1,1)
  (same comment as for Aluminium III)
- Molybdenum VI [water, ground-, long-term]: 4.0691e-7 kg; lognormal variance with pedigree 1.6502, pedigree (1,1,4,1,1)
  (same comment as for Aluminium III)
- Molybdenum VI [water, surface water]: 1.5317e-7 kg; lognormal variance with pedigree 1.1813, pedigree (1,1,4,1,1)
  (same comment as for Aluminium III)
- Nickel II [water, ground-, long-term]: 0.0018285 kg; lognormal variance with pedigree 0.56232, pedigree (1,1,4,1,1)
  (same comment as for Aluminium III)
- Nickel II [water, surface water]: 1.2799e-6 kg; lognormal variance with pedigree 1.1523, pedigree (1,1,4,1,1)
  (same comment as for Aluminium III)
- Nitrate [water, ground-, long-term]: 4.5696e-5 kg; lognormal variance with pedigree 0.6401, pedigree (1,1,4,1,1)
  (same comment as for Aluminium III)
- Nitrate [water, surface water]: 1.6196e-5 kg; lognormal variance with pedigree 0.4448, pedigree (1,1,4,1,1)
  (same comment as for Aluminium III)
- Phosphate [water, ground-, long-term]: 6.2122e-6 kg; lognormal variance with pedigree 5.2053, pedigree (1,1,4,1,1)
  (same comment as for Aluminium III)
- Phosphate [water, surface water]: 2.6065e-8 kg; lognormal variance with pedigree 0.76577, pedigree (1,1,4,1,1)
  (same comment as for Aluminium III)
- Potassium I [water, ground-, long-term]: 0.00075061 kg; lognormal variance with pedigree 0.34973, pedigree (1,1,4,1,1)
  (same comment as for Aluminium III)
- Potassium I [water, surface water]: 0.00021019 kg; lognormal variance with pedigree 0.40053, pedigree (1,1,4,1,1)
  (same comment as for Aluminium III)
- Selenium IV [water, ground-, long-term]: 2.2146e-8 kg; lognormal variance with pedigree 1.4777, pedigree (1,1,4,1,1)
  (same comment as for Aluminium III)
- Selenium IV [water, surface water]: 1.1518e-8 kg; lognormal variance with pedigree 1.5837, pedigree (1,1,4,1,1)
  (same comment as for Aluminium III)
- Silicon [water, ground-, long-term]: 0.0025246 kg; lognormal variance with pedigree 5.7147, pedigree (1,1,4,1,1)
  (same comment as for Aluminium III)
- Silicon [water, surface water]: 1.0876e-5 kg; lognormal variance with pedigree 1.1343, pedigree (1,1,4,1,1)
  (same comment as for Aluminium III)
- Silver I [water, ground-, long-term]: 1.9763e-5 kg; lognormal variance with pedigree 1.1092, pedigree (1,1,4,1,1)
  (same comment as for Aluminium III)
- Silver I [water, surface water]: 1.1277e-7 kg; lognormal variance with pedigree 1.115, pedigree (1,1,4,1,1)
  (same comment as for Aluminium III)
- Sodium I [water, ground-, long-term]: 0.0464 kg; lognormal variance with pedigree 0.19101, pedigree (1,1,4,1,1)
  (same comment as for Aluminium III)
- Sodium I [water, surface water]: 0.00645 kg; lognormal variance with pedigree 0.29305, pedigree (1,1,4,1,1)
  (same comment as for Aluminium III)
- Strontium [water, ground-, long-term]: 1.4351e-6 kg; lognormal variance with pedigree 1.5298, pedigree (1,1,4,1,1)
  (same comment as for Aluminium III)
- Strontium [water, surface water]: 9.0473e-10 kg; lognormal variance with pedigree 2.2419, pedigree (1,1,4,1,1)
  (same comment as for Aluminium III)
- Sulfate [water, ground-, long-term]: 0.00025405 kg; lognormal variance with pedigree 0.59273, pedigree (1,1,4,1,1)
  (same comment as for Aluminium III)
- Sulfate [water, surface water]: 5.2037e-5 kg; lognormal variance with pedigree 0.48622, pedigree (1,1,4,1,1)
  (same comment as for Aluminium III)
- TOC, Total Organic Carbon [water, ground-, long-term]: 0.0001883 kg; lognormal variance with pedigree 0.10867, pedigree (1,1,4,1,1)
  (same comment as for Aluminium III)
- TOC, Total Organic Carbon [water, surface water]: 3.237e-5 kg; lognormal variance with pedigree 0.18864, pedigree (1,1,4,1,1)
  (same comment as for Aluminium III)
- Thallium I [water, ground-, long-term]: 3.7897e-9 kg; lognormal variance with pedigree 1.4767, pedigree (1,1,4,1,1)
  (same comment as for Aluminium III)
- Thallium I [water, surface water]: 3.9786e-12 kg; lognormal variance with pedigree 2.0891, pedigree (1,1,4,1,1)
  (same comment as for Aluminium III)
- Tin ion [water, ground-, long-term]: 0.00095793 kg; lognormal variance with pedigree 1.3652, pedigree (1,1,4,1,1)
  (same comment as for Aluminium III)
- Tin ion [water, surface water]: 6.1229e-8 kg; lognormal variance with pedigree 1.2488, pedigree (1,1,4,1,1)
  (same comment as for Aluminium III)
- Titanium ion [water, ground-, long-term]: 2.3288e-5 kg; lognormal variance with pedigree 1.0965, pedigree (1,1,4,1,1)
  (same comment as for Aluminium III)
- Titanium ion [water, surface water]: 2.9045e-8 kg; lognormal variance with pedigree 0.75321, pedigree (1,1,4,1,1)
  (same comment as for Aluminium III)
- Vanadium V [water, ground-, long-term]: 6.0833e-9 kg; lognormal variance with pedigree 1.5186, pedigree (1,1,4,1,1)
  (same comment as for Aluminium III)
- Vanadium V [water, surface water]: 2.0836e-11 kg; lognormal variance with pedigree 1.8505, pedigree (1,1,4,1,1)
  (same comment as for Aluminium III)
- Water [water, surface water]: 0.00041996 m3; lognormal variance with pedigree 0.83996, pedigree (1,1,4,1,1)
  Process water released to surface water.
  Uncertainty: uncertainty calculated from uncertainty in process water input and the uncertainty of fraction to surface water.
- Zinc II [water, ground-, long-term]: 0.00078492 kg; lognormal variance with pedigree 2.6724, pedigree (1,1,4,1,1)
  (same comment as for Aluminium III)
- Zinc II [water, surface water]: 2.3202e-7 kg; lognormal variance with pedigree 0.4963, pedigree (1,1,4,1,1)
  (same comment as for Aluminium III)
