# acetaldehyde oxidation

Dataset: EcoSpold 2, unit process
Geography: RoW
Time period: 1981-01-01 to 2022-12-31
Technology level: current
Classification: ISIC rev.4 ecoinvent: 2011:Manufacture of basic chemicals
Classification: EcoSpold01Categories: chemicals/organics
Tags: ConvertedDataset
Scenario: Business-as-Usual
System model: Substitution, consequential, long-term
Share of production covered: 100 %
Generated by: Jürgen Sutter
Published in: Sutter, J. 2007
Database: ecoinvent
isCopyrightProtected: true

## General comment
The multioutput-process "acetaldehyde oxidation process" delivers the co-products acetic anhydride from acetyaldehyde and acetic acid from acetaldehyde. The allocation is based on mass balance.
[This dataset was already contained in the ecoinvent database version 2. It was not individually updated during the transfer to ecoinvent version 3. Life Cycle Impact Assessment results may still have changed, as they are affected by changes in the supply chain, i.e. in other datasets. This dataset was generated following the ecoinvent quality guidelines for version 2. It may have been subject to central changes described in the ecoinvent version 3 change report (http://www.ecoinvent.org/database/ecoinvent-version-3/reports-of-changes/), and the results of the central updates were reviewed extensively. The changes added e.g. consistent water flows and other information throughout the database. The documentation of this dataset can be found in the ecoinvent reports of version 2, which are still available via the ecoinvent website. The change report linked above covers all central changes that were made during the conversion process.]

## Included activities end
Oxidation acetaldehyde including materials, energy uses, infrastructure and emissions.

## Geography
The inventory is modelled for Europe.

## Technology
Oxidation of acetaldehyde

## Time period
Time of publications.

## Parameters
- fraction, cooling water, cooling pond system, to air: 0.032 dimensionless; name fraction_CW_CP_to_air; lognormal variance with pedigree 0.0413, pedigree (2,3,1,3,1)
  Calculated based on literature value (Scown, C.D., 2011, Water Footprint of U.S. Transportation Fuels and supplying information of the article) (Vionnet, S., Quantis Water Database - Technical Report, 2012).
- fraction, cooling water, once-through system, to air: 0.004 dimensionless; name fraction_CW_OT_to_air; lognormal variance with pedigree 0.0413, pedigree (2,3,1,3,1)
  (same comment as for fraction, cooling water, cooling pond system, to air)
- fraction, cooling water, recirculating system, to air: 0.771 dimensionless; name fraction_CW_R_to_air; lognormal variance with pedigree 0.0413, pedigree (2,3,1,3,1)
  (same comment as for fraction, cooling water, cooling pond system, to air)
- fraction, cooling water, to air: 0.3875 dimensionless; name fraction_CW_to_air; = (0.5*fraction_CW_OT_to_air)+(0.5*fraction_CW_R_to_air); lognormal variance with pedigree 0.092025, pedigree (4,4,3,2,4)
  Calculated value based on literature value (see comments of the other parametres present in this dataset) and expert opinion. In the case when no industry/literature data are available about the type of cooling or directly fraction, cooling water, to air specific for the process a default assumption is applied. It is assumed that the once-through cooling system is used in 50% of all cases and recirculating system is used in another 50% of all cases.
- fraction, process water, to air: 0.205 dimensionless; name fraction_PW_to_air; lognormal variance with pedigree 0.092025, pedigree (4,4,3,2,4)
  Literature value (Statistics Canada, 2007 & Shaffer, K.H., 2008, Consumptive water use in the Great Lakes Basin, USGS) (Vionnet, S., Quantis Water Database - Technical Report, 2012).
- fraction, water, deionised, to air: 0.205 dimensionless; name fraction_WDI_to_air; = fraction_PW_to_air; lognormal variance with pedigree 0.092025, pedigree (4,4,3,2,4)
  Calculated value. See comment in the other parametres present in this dataset. Deionised water is considered to be always used as process water, thus process water fractions to air are applied to all deionised water input flows to calculate the amount of water consumed in the processes.

## Reference product
- acetic anhydride: 1 kg; By-product classification allocatable product; CPC 34120: Industrial monocarboxylic fatty acids; acid oils from refining; CAS 108-24-7
  EcoSpold01Location=RER
  production volume 4.50824e8 kg
    Source: Catalyst Group Resources (2007): Syngas Production and Conversion to Products: A Strategic Assessment of the Technologies, Markets and Competitive Landscape. Springhouse. The acetaldehyde route is used as proxy for the 25% of global market that is not from the ketene route.
  property heating value, net 21.38 MJ
    LHV is calculated based on the elemental composition of the substance. Based on the CAS number of the substance (000108-24-7), the chemical formula of the substance is found to be: C4H6O3, (PubChem 2020).
    Reference: Kim, S., Chen, J., Cheng, T., Gindulyte, A., He, J., He, S., Li, Q., Shoemaker, B. A., Thiessen, P. A., Yu, B., Zaslavsky, L., Zhang, J., & Bolton, E. E. (2019). PubChem 2019 update: improved access to chemical data. Nucleic acids research, 47(D1), D1102–D1109. https://doi.org/10.1093/nar/gky1033
  property price 0.691 EUR2005
    Temporary price data. Calculated as 90% of purchasers price based on: Source: 28 August 2006 issue of Chemical Market Reporter (ICIS)
  properties: EcoSpold01Allocation_undefined_1 100, EcoSpold01Allocation_undefined_10 83.33, EcoSpold01Allocation_undefined_11 83.33, EcoSpold01Allocation_undefined_12 83.33, EcoSpold01Allocation_undefined_13 83.33, EcoSpold01Allocation_undefined_14 83.33, EcoSpold01Allocation_undefined_15 83.33, EcoSpold01Allocation_undefined_16 83.33, EcoSpold01Allocation_undefined_17 83.33, EcoSpold01Allocation_undefined_18 83.33, EcoSpold01Allocation_undefined_19 83.33, EcoSpold01Allocation_undefined_2 83.33, EcoSpold01Allocation_undefined_20 83.33, EcoSpold01Allocation_undefined_21 83.33, EcoSpold01Allocation_undefined_22 83.33, EcoSpold01Allocation_undefined_23 83.33, EcoSpold01Allocation_undefined_24 83.33, EcoSpold01Allocation_undefined_3 83.33, EcoSpold01Allocation_undefined_4 83.33, EcoSpold01Allocation_undefined_5 83.33, EcoSpold01Allocation_undefined_6 83.33, EcoSpold01Allocation_undefined_7 83.33, EcoSpold01Allocation_undefined_8 83.33, EcoSpold01Allocation_undefined_9 83.33, carbon allocation 0.470588 kg, carbon content 0.470588, carbon content, fossil 0.470588, carbon content, non-fossil 0, dry mass 1 kg, water content 0, water in wet mass 0 kg, wet mass 1 kg

## Inputs from technosphere
- acetaldehyde: 1.12667 kg; lognormal variance with pedigree 0.0726, pedigree (1,3,5,5,1)
  Wells 1991
  EcoSpold01Location=RER
  Uncertainty: Wells 1991
  properties: carbon content, fossil 0.545296, dry mass 1 kg, heating value, net 27.53 MJ, wet mass 1 kg
- acetic acid, without water, in 98% solution state: -0.199995 kg
  EcoSpold01Location=RER
  production volume
    This corresponds to approx 2.2% of global production volume
  properties: EcoSpold01Allocation_undefined_10 16.67, EcoSpold01Allocation_undefined_11 16.67, EcoSpold01Allocation_undefined_12 16.67, EcoSpold01Allocation_undefined_13 16.67, EcoSpold01Allocation_undefined_14 16.67, EcoSpold01Allocation_undefined_15 16.67, EcoSpold01Allocation_undefined_16 16.67, EcoSpold01Allocation_undefined_17 16.67, EcoSpold01Allocation_undefined_18 16.67, EcoSpold01Allocation_undefined_19 16.67, EcoSpold01Allocation_undefined_2 16.67, EcoSpold01Allocation_undefined_25 100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
- chemical factory, organics: 4.80007e-10 unit; lognormal variance with pedigree 0.448, pedigree (4,5,5,5,5)
  Estimation
  EcoSpold01Location=RER
  Uncertainty: Estimation
- cobalt: 0.000166669 kg; lognormal variance with pedigree 0.0726, pedigree (1,3,5,5,1)
  Wells 1991
  EcoSpold01Location=GLO
  Uncertainty: Wells 1991
  properties: dry mass 1 kg, wet mass 1 kg
- copper, cathode: 0.000232049 kg; lognormal variance with pedigree 0.0726, pedigree (1,3,5,5,1)
  Wells 1991
  EcoSpold01Location=RER
  Uncertainty: Wells 1991
  properties: dry mass 1 kg, wet mass 1 kg
- electricity, medium voltage: 0.0995333, 0.0689556, 0.00369598, 0.821216, 0.00372405, 0.0473154 kWh (6 suppliers, which the file names only by identifier); sum of these 1.04444 kWh; lognormal variance with pedigree 0.0726, pedigree (1,3,5,5,1)
  EcoSpold01Location=UCTE
  Chauvel 1989
  Uncertainty: Chauvel 1989
- ethyl acetate: 0.01 kg; lognormal variance with pedigree 0.0726, pedigree (1,3,5,5,1)
  EcoSpold01Location=RER
  Wells 1991
  Uncertainty: Wells 1991
  properties: carbon content, fossil 0.545455, dry mass 1 kg, heating value, net 31.32 MJ, wet mass 1 kg
- heat, district or industrial, natural gas: 0.550707, 3.62935 MJ (2 suppliers, which the file names only by identifier); sum of these 4.18006 MJ; lognormal variance with pedigree 0.0726, pedigree (1,3,5,5,1)
  Uncertainty: Chauvel 1989
  properties: heating value, net 1 MJ
- heat, district or industrial, other than natural gas: 2.32906, 0.00406696 MJ (2 suppliers, which the file names only by identifier); sum of these 2.33313 MJ; lognormal variance with pedigree 0.0726, pedigree (1,3,5,5,1)
  Uncertainty: Chauvel 1989
  properties: heating value, net 1 MJ
- water, deionised: 1.99995 kg; name water_deionised_input; lognormal variance with pedigree 0.0726, pedigree (1,3,5,5,1)
  Chauvel 1989
  EcoSpold01Location=CH
  Uncertainty: Chauvel 1989
  properties: wet mass 1 kg

## Inputs from nature
- Water, cooling, unspecified natural origin [natural resource, in water]: 0.299999 m3; name water_cooling_UNO_input; lognormal variance with pedigree 0.0726, pedigree (1,3,5,5,1)
  Chauvel 1989
  Uncertainty: Chauvel 1989

## Emissions to nature
- Acetaldehyde [air, urban air close to ground]: 0.00225334 kg; lognormal variance with pedigree 0.188, pedigree (4,5,5,5,5)
  Estimation
  Uncertainty: Estimation
- Carbon dioxide, fossil [air, urban air close to ground]: 0.207003 kg; lognormal variance with pedigree 0.1786, pedigree (4,5,5,5,5)
  From water treatment
  Uncertainty: from water treatment
- Ethyl acetate [air, urban air close to ground]: 2.00007e-5 kg; lognormal variance with pedigree 0.218, pedigree (4,5,5,5,5)
  Estimation
  Uncertainty: Estimation
- Water [air, unspecified]: 0.11666 m3; name water_to_air_unspecified; lognormal variance with pedigree 0.0827, pedigree (2,2,5,5,1)
  Calculated value based on literature values and expert opinion. See comments in the parametres' comment field.
  property fraction, origin: fresh water 0.00351442; name fraction_origin_fresh_water
  property fraction, origin: salt water 0; name fraction_origin_salt_water
  property fraction, origin: unspecified 0.996486; name fraction_origin_unspecified
- Acetaldehyde [water, surface water]: 0.0114999 kg; lognormal variance with pedigree 0.218, pedigree (4,5,5,5,5)
  Estimation
  Uncertainty: Estimation
- BOD5, Biological Oxygen Demand [water, surface water]: 0.0200548 kg; lognormal variance with pedigree 0.188, pedigree (4,5,5,5,5)
  From water emissions
  Uncertainty: from water emissions
- COD, Chemical Oxygen Demand [water, surface water]: 0.0200548 kg; lognormal variance with pedigree 0.188, pedigree (4,5,5,5,5)
  From water emissions
  Uncertainty: from water emissions
- Cobalt II [water, surface water]: 0.000166669 kg; lognormal variance with pedigree 0.448, pedigree (4,5,5,5,5)
  Estimation
  Uncertainty: Estimation
- Copper ion [water, surface water]: 0.000232049 kg; lognormal variance with pedigree 0.448, pedigree (4,5,5,5,5)
  Estimation
  Uncertainty: Estimation
- DOC, Dissolved Organic Carbon [water, surface water]: 0.00627556 kg; lognormal variance with pedigree 0.188, pedigree (4,5,5,5,5)
  From water emissions
  Uncertainty: from water emissions
- Ethyl acetate [water, surface water]: 8.00005e-6 kg; lognormal variance with pedigree 0.218, pedigree (4,5,5,5,5)
  Estimation
  Uncertainty: Estimation
- TOC, Total Organic Carbon [water, surface water]: 0.00627556 kg; lognormal variance with pedigree 0.188, pedigree (4,5,5,5,5)
  From water emissions
  Uncertainty: from water emissions
- Water [water, unspecified]: 0.18534 m3; name water_to_water_unspecified; lognormal variance with pedigree 0.0827, pedigree (2,2,5,5,1)
  (same comment as for Water)
  property carbon content, fossil 0; name C_content_fossil
  property carbon content, non-fossil 0; name C_content_non_fossil
  property fraction, origin: fresh water 0.00857867; name fraction_origin_fresh_water_Ww
  property fraction, origin: salt water 0; name fraction_origin_salt_water_Ww
  property fraction, origin: unspecified 0.991421; name fraction_origin_unspecified_Ww
  property water in wet mass 1000 kg; name WWM

## Sampling procedure
Literature data

## Extrapolations
Transports and emissions are modelled with standard methods. This dataset has been copied from an original dataset covering the geography RER. The uncertainty has been adjusted accordingly.

## Review by Roland Hischier 2007-09-20
passed.
-
