# treatment of sewage sludge, 75% water, WWT, WW, average, sanitary landfill

Dataset: EcoSpold 2, unit process
Geography: RoW
Time period: 1994-01-01 to 2022-12-31
Technology level: current
Classification: ISIC rev.4 ecoinvent: 3821:Treatment and disposal of non-hazardous waste
Scenario: Business-as-Usual
System model: Substitution, consequential, long-term
Generated by: Nikolia Stoikou
Database: ecoinvent
isCopyrightProtected: true

## General comment
The process represents the treatment of a waste (sewage sludge) that is exclusively generated from another waste treatment. Sewage sludge is generated in the wastewater treatment of 'wastewater, average'. Recommended use of this dataset: to be used within the specific chain of treatments for 'wastewater, average'. Share of biogenic carbon in the sludge: 97.432%. Landfill gas capture and utilisation generates 0.03321 kWh of electricity and 0.0599 MJ of useful heat. 0.002598 kg waste mass remains in the landfill even after the long term period.

## Included activities start
The activity starts with the waste being available at the gate of the treatment facility. Collection and transportation of the waste to the treatment plant is not included.

## Included activities end
The activity ends with the waste being treated and waste-specific emissions from the landfill are released to the environment (air due to landfil gas and water due to landfil leachate).

## Geography
Landfill site with mean annual temperature (MAT) of 16.743579766537 degC, mean annual precipitation (MAP) of 1250.84108527132 mm/year, and net infiltration of 790.252035689178 mm/year.The leachate percolating through the landfill has an average residence time of 6.33 years.
References: UN data, 2020. Precipitation, Environment Statistics Database, United Nations Statistics Division Available at: http://data.un.org/Data.aspx?q=precipitation&d=ENV&f=variableID%3a6;
World Bank, 2022. Surface area (sq.km), World Bank Group Available at: https://data.worldbank.org/indicator/AG.SRF.TOTL.K2;
Doka G.,2021. A model for composition-specific life cycle inventories of regionalised wastewater fates, Zurich, Switzerland. http://www.doka.ch/publications.htm

## Technology
Sanitary (controlled) landfill for municipal solid waste. Ultimate average landfill height is 20 meters. Operation phase duration is 30 years. The total raw landfill gas mass produced in the landfill from this waste is 0.1246 kg. The total CH4 mass in the raw landfill gas is 0.0527 kg. Percentage of landfill gas directly emitted is 47w%. Percentage of landfill gas captured and flared is 18.02w%. Percentage of landfill gas captured and utilised is 34.98%. Conversion efficiencies are 27.8e% for electricity and 13.5e% for useful heat. Leachate generated during the first 100 years is collected and treated region-specifically before emission. Based on average waste composition and climate data the end of carbonate phase is estimated to be reached 2'863 years after waste deposition.

## Reference product
- sewage sludge, 75% water, WWT, WW, average: -1 kg; By-product classification Waste; CPC 39920: Sewage sludge
  production volume 2.78176e9 kg
    In global scale, 25.25% of the sewage sludge is disposed through municipal incineration, 16.15% in sanitary landfill, and 58.6% in landfarming. Therefore, the PV for this reference product is calculated based on the production of sewage sludge of the wastewater treatment process (Doka G.,2021. A model for composition-specific life cycle inventories of regionalised wastewater fates, Zurich, Switzerland. http://www.doka.ch/publications.htm)
  properties: aluminium content 2.60082e-5, antimony content 2.92467e-6, arsenic content 2.47713e-6, barium content 0.000302677, beryllium content 1.59886e-7, boron content 2.39844e-5, cadmium content 1.32234e-6, calcium content 0.0431776, carbon allocation 0.0904836 kg, carbon content 0.361935, carbon content, fossil 0.00929452, carbon content, non-fossil 0.35264, chromium content 3.43897e-5, cobalt content 6.64737e-6, copper content 0.000269533, dry mass 0.25 kg, heating value, gross 14.4538 MJ, heating value, net 6.87903 MJ, hydrogen content 0.0492283, iron content 0.0273536, lead content 3.23236e-5, magnesium content 0.0034291, manganese content 0.000359996, mercury content 2.91265e-7, molybdenum content 6.62898e-6, nickel content 1.30922e-5, nitrogen content 0.0440158, oxygen content 0.438986, phosphorus content 0.0172386, potassium content 0.00347296, price 0 EUR2005, scandium content 4.26261e-6, selenium content 2.80802e-6, silicon content 0.00284064, silver content 9.29206e-6, sodium content 0.00271312, strontium content 0.000276609, sulfur content 0.00339905, thallium content 2.01901e-7, tin content 1.97388e-5, titanium content 0.000123816, tungsten content 1.38756e-6, vanadium content 2.34452e-5, water content 3, water in wet mass 0.75 kg, wet mass 1 kg, zinc content 0.000666438

## Inputs from technosphere
- cast iron: 1.47498e-6 kg; lognormal variance with pedigree 0.32713, pedigree (1,1,4,1,1)
  For sewer auxiliary materials.
  Uncertainty: Uncertainty calculated from uncertainty in base parameters.
  properties: carbon content, fossil 0.04, dry mass 1 kg, wet mass 1 kg
- concrete, 30MPa: 6.45013e-10, 1.26774e-7, 1.24845e-8, 2.99584e-9 m3 (4 suppliers, which the file names only by identifier); sum of these 1.429e-7 m3; lognormal variance with pedigree 0.32713, pedigree (1,1,4,1,1)
  For leachate collection tanks and sewer pipe.
  Uncertainty: Uncertainty calculated from uncertainty in base parameters.
  properties: carbon content, fossil 1e-51, dry mass 2316 kg, water content 0.054836, wet mass 2443 kg
- diesel, burned in building machine: 0.0483865 MJ; lognormal variance with pedigree 0.32713, pedigree (1,1,4,1,1)
  For waste distribution and compaction, construction diesel for base and compartment seals, for access street and sewer construction.
  Uncertainty: Uncertainty calculated from uncertainty in base parameters.
  properties: heating value, net 1 MJ
- electricity, low voltage: 1.90241e-7, 1.14493e-5, 1.27688e-6, 1.37154e-6, 4.78225e-8, 2.1026e-8, 6.43211e-7 kWh (7 suppliers, which the file names only by identifier); sum of these 1.5e-5 kWh; lognormal variance with pedigree 0.02687, pedigree (1,1,4,1,1)
  Administrative building electricity consumption.
  Uncertainty: Uncertainty calculated from uncertainty in base parameters.
- electricity, medium voltage: -0.00391878, -0.00271489, -0.000145516, -0.0323325, -0.000146622, -5.87196e-5, -0.00186288 kWh (7 suppliers, which the file names only by identifier); sum of these -0.0411799 kWh; lognormal variance with pedigree 0.12555, pedigree (1,1,1,1,1)
  Net production of electricity from landfill gas utilisation (minus electricity demand for landfill gas pumping).
  Uncertainty: Uncertainty calculated depending on waste input and uncertainty of transfer coefficients in landfill to landfill gas, uncertainty in gas capture and utilisation.
  production volume
    Calculated from the production volume of the reference product in proportion to the respective output amounts.
  properties: carbon content, fossil 0.142876, dry mass 50.7 kg, price 0.1 EUR2005, wet mass 50.7 kg
- excavation, hydraulic digger: 0.000387746 m3; lognormal variance with pedigree 0.32713, pedigree (1,1,4,1,1)
  Excavation work for landfill construction, sewer construction and recultivation.
  Uncertainty: Uncertainty calculated from uncertainty in base parameters.
- excavation, skid-steer loader: 0.000387746 m3; lognormal variance with pedigree 0.32713, pedigree (1,1,4,1,1)
  (same comment as for excavation, hydraulic digger)
- extrusion, plastic pipes: 8.49391e-5 kg; lognormal variance with pedigree 0.32713, pedigree (1,1,4,1,1)
  For base and interior drain system of landfill, sewer auxiliary materials.
  Uncertainty: Uncertainty calculated from uncertainty in base parameters.
- gravel, round: 4.1637e-5, 0.160101 kg (2 suppliers, which the file names only by identifier); sum of these 0.160142 kg; lognormal variance with pedigree 0.32713, pedigree (1,1,4,1,1)
  For base and flank gravel beds and concrete, for access street, for drainage beds, for recultivation layer.
  Uncertainty: Uncertainty calculated from uncertainty in base parameters.
  properties: dry mass 1 kg, wet mass 1 kg
- heat, district or industrial, other than natural gas: -0.0725263, -0.000126644, -5.57877e-6 MJ (3 suppliers, which the file names only by identifier); sum of these -0.0726585 MJ
  Net production of heat from landfill gas utilisation.
  production volume
    (same comment as for electricity, medium voltage)
  properties: dry mass 1.02216 kg, heating value, net 1 MJ, price 0.0108349 EUR2005, wet mass 1.02216 kg
- pitch: 0.000129478, 1.49704e-5, 7.3792e-6, 1.09255e-5, 0.00188795, 2.81994e-6, 0.000333981 kg (7 suppliers, which the file names only by identifier); sum of these 0.0023875 kg; lognormal variance with pedigree 0.32713, pedigree (1,1,4,1,1)
  For base and compartment seals and access street construction.
  Uncertainty: Uncertainty calculated from uncertainty in base parameters.
  properties: carbon content, fossil 0.83, dry mass 1 kg, heating value, net 28 MJ, wet mass 1 kg
- polyethylene, high density, granulate: 0.000268492 kg; lognormal variance with pedigree 0.32713, pedigree (1,1,4,1,1)
  For base and compartment seals, for base and interior drain system of landfill, sewer auxiliary materials.
  Uncertainty: Uncertainty calculated from uncertainty in base parameters.
  properties: carbon content, fossil 0.857143, dry mass 1 kg, heating value, net 42.47 MJ, wet mass 1 kg
- polypropylene, granulate: 2.23482e-7 kg; lognormal variance with pedigree 0.32713, pedigree (1,1,4,1,1)
  (same comment as for cast iron)
  properties: carbon content, fossil 0.857143, dry mass 1 kg, heating value, net 32.78 MJ, wet mass 1 kg
  note on heating value, net: Value extracted from "treatment of waste polypropylene, open burning"
- polyvinylchloride, bulk polymerised: 2.23482e-7 kg; lognormal variance with pedigree 0.32713, pedigree (1,1,4,1,1)
  (same comment as for cast iron)
  properties: carbon content, fossil 0.387097, dry mass 1 kg, heating value, net 21.5 MJ, wet mass 1 kg
- reinforcing steel: 8.71581e-6 kg; lognormal variance with pedigree 0.32713, pedigree (1,1,4,1,1)
  (same comment as for cast iron)
  properties: carbon content, fossil 0.004, dry mass 1 kg, wet mass 1 kg
- sand: 1.21143e-8, 5.25272e-9, 1.01179e-6, 6.58368e-5 kg (4 suppliers, which the file names only by identifier); sum of these 6.68659e-5 kg; lognormal variance with pedigree 0.32713, pedigree (1,1,4,1,1)
  (same comment as for cast iron)
  properties: dry mass 1 kg, wet mass 1 kg
- steel, chromium steel 18/8, hot rolled: 3.03936e-6 kg; lognormal variance with pedigree 0.32713, pedigree (1,1,4,1,1)
  (same comment as for cast iron)
  properties: carbon content, fossil 0.0008, dry mass 1 kg, wet mass 1 kg
- synthetic rubber: 8.93929e-8 kg; lognormal variance with pedigree 0.32713, pedigree (1,1,4,1,1)
  (same comment as for cast iron)
  properties: carbon content, fossil 0.871949, dry mass 1 kg, heating value, net 26.42 MJ, wet mass 1 kg
- tap water: 4.47911e-5, 0.000225153, 8.3578e-5, 2.01426e-5, 7.53333e-7, 2.93825e-5, 0.00112946, 0.000324463 kg (8 suppliers, which the file names only by identifier); sum of these 0.00185772 kg; lognormal variance with pedigree 0.32713, pedigree (1,1,4,1,1)
  (same comment as for cast iron)
  properties: carbon content, fossil 0.00178991, dry mass 0.000337476 kg, water content 2962.17, wet mass 1 kg

## Inputs from nature
- Organic carbon, placed in landfill [inventory indicator, waste]: 0.0904838 kg; lognormal variance with pedigree 0.11105, pedigree (1,1,4,1,1)
  Mass of organic carbon in waste (without inorganic carbon), initially (year 1) put in sanitary landfill. The exchange represents a flow that is within the technosphere. This exchange should only be used to apply ecofactors for the Swiss LCIA method of Ecological Scarcity and not any other purpose.
  Uncertainty: uncertainty is derived from uncertainty in waste composition and flows.
- Waste mass, total, placed in landfill [inventory indicator, waste]: 1 kg
  Mass of waste initially (year 1) put in sanitary landfill. The exchange represents a flow that is within the technosphere. This exchange should only be used to apply ecofactors for the Swiss LCIA method of Ecological Scarcity and not any other purpose.
- Occupation, construction site [natural resource, land]: 0.00025 m2*year; lognormal variance with pedigree 0.32713, pedigree (1,1,4,1,1)
  For construction phase of the landfill.
  Uncertainty: Uncertainty calculated from uncertainty in base parameters.
- Occupation, dump site [natural resource, land]: 0.0015 m2*year; lognormal variance with pedigree 0.32713, pedigree (1,1,4,1,1)
  For landfill operation phase.
  Uncertainty: Uncertainty calculated from uncertainty in base parameters.
- Occupation, shrub land, sclerophyllous [natural resource, land]: 0.00025 m2*year; lognormal variance with pedigree 0.32713, pedigree (1,1,4,1,1)
  Restoration and aftercare phase.
  Uncertainty: Uncertainty calculated from uncertainty in base parameters.
- Occupation, traffic area, road network [natural resource, land]: 0.00185 m2*year; lognormal variance with pedigree 0.32713, pedigree (1,1,4,1,1)
  For access road.
  Uncertainty: Uncertainty calculated from uncertainty in base parameters.
- Transformation, from dump site, sanitary landfill [natural resource, land]: 5e-5 m2; lognormal variance with pedigree 0.32713, pedigree (1,1,4,1,1)
  Conversion after landfill operation.
  Uncertainty: Uncertainty calculated from uncertainty in base parameters.
- Transformation, from pasture, man made [natural resource, land]: 6e-5 m2; lognormal variance with pedigree 0.32713, pedigree (1,1,4,1,1)
  Original conversion of landfill area and access road.
  Uncertainty: Uncertainty calculated from uncertainty in base parameters.
- Transformation, from shrub land, sclerophyllous [natural resource, land]: 5e-5 m2; lognormal variance with pedigree 0.32713, pedigree (1,1,4,1,1)
  After restoration.
  Uncertainty: Uncertainty calculated from uncertainty in base parameters.
- Transformation, to dump site, sanitary landfill [natural resource, land]: 5e-5 m2; lognormal variance with pedigree 0.32713, pedigree (1,1,4,1,1)
  Conversion to landfill area.
  Uncertainty: Uncertainty calculated from uncertainty in base parameters.
- Transformation, to forest, unspecified [natural resource, land]: 5e-5 m2; lognormal variance with pedigree 0.32713, pedigree (1,1,4,1,1)
  Conversion to forest after renaturation.
  Uncertainty: Uncertainty calculated from uncertainty in base parameters.
- Transformation, to shrub land, sclerophyllous [natural resource, land]: 5e-5 m2; lognormal variance with pedigree 0.32713, pedigree (1,1,4,1,1)
  Initial restoration and renaturation.
  Uncertainty: Uncertainty calculated from uncertainty in base parameters.
- Transformation, to traffic area, road network [natural resource, land]: 1e-5 m2; lognormal variance with pedigree 0.32713, pedigree (1,1,4,1,1)
  Construction of access road.
  Uncertainty: Uncertainty calculated from uncertainty in base parameters.

## Emissions to nature
- Aluminium III [air, non-urban air or from high stacks]: 4.8749e-11 kg; lognormal variance with pedigree 1.581, pedigree (1,1,4,1,1)
  Emission from direct release or combustion of landfill biogas.
  Uncertainty: Uncertainty calculated from uncertainty of the waste composition of this waste, uncertainty in waste decomposition and short-term leaching in landfill-
- Antimony ion [air, non-urban air or from high stacks]: 1.15647e-11 kg; lognormal variance with pedigree 1.6239, pedigree (1,1,4,1,1)
  (same comment as for Aluminium III)
- Arsenic ion [air, non-urban air or from high stacks]: 9.35511e-10 kg; lognormal variance with pedigree 1.0695, pedigree (1,1,4,1,1)
  (same comment as for Aluminium III)
- Barium II [air, non-urban air or from high stacks]: 1.29984e-8 kg; lognormal variance with pedigree 1.0592, pedigree (1,1,4,1,1)
  (same comment as for Aluminium III)
- Beryllium II [air, non-urban air or from high stacks]: 3.48547e-13 kg; lognormal variance with pedigree 2.1253, pedigree (1,1,4,1,1)
  (same comment as for Aluminium III)
- Cadmium II [air, non-urban air or from high stacks]: 2.32658e-10 kg; lognormal variance with pedigree 1.2644, pedigree (1,1,4,1,1)
  (same comment as for Aluminium III)
- Calcium [air, non-urban air or from high stacks]: 2.10811e-7 kg; lognormal variance with pedigree 1.264, pedigree (1,1,4,1,1)
  (same comment as for Aluminium III)
- Carbon dioxide, fossil [air, non-urban air or from high stacks]: 0.00365695 kg; lognormal variance with pedigree 0.12323, pedigree (1,1,4,1,1)
  (same comment as for Aluminium III)
- Carbon dioxide, non-fossil [air, non-urban air or from high stacks]: 0.138747 kg; lognormal variance with pedigree 0.12323, pedigree (1,1,4,1,1)
  (same comment as for Aluminium III)
- Carbon monoxide, fossil [air, non-urban air or from high stacks]: 2.23115e-7 kg; lognormal variance with pedigree 0.77021, pedigree (1,1,4,1,1)
  (same comment as for Aluminium III)
- Carbon monoxide, non-fossil [air, non-urban air or from high stacks]: 8.46512e-6 kg; lognormal variance with pedigree 0.77021, pedigree (1,1,4,1,1)
  (same comment as for Aluminium III)
- Chromium III [air, non-urban air or from high stacks]: 1.46985e-11 kg; lognormal variance with pedigree 1.8059, pedigree (1,1,4,1,1)
  (same comment as for Aluminium III)
- Cobalt II [air, non-urban air or from high stacks]: 8.01156e-11 kg; lognormal variance with pedigree 1.4496, pedigree (1,1,4,1,1)
  (same comment as for Aluminium III)
- Copper ion [air, non-urban air or from high stacks]: 5.65609e-11 kg; lognormal variance with pedigree 1.7947, pedigree (1,1,4,1,1)
  (same comment as for Aluminium III)
- Heat, waste [air, non-urban air or from high stacks]: 0.833544 MJ
  Emission from direct release or incineration of landfill biogas.
- Iron ion [air, non-urban air or from high stacks]: 1.4088e-8 kg; lognormal variance with pedigree 1.6028, pedigree (1,1,4,1,1)
  (same comment as for Aluminium III)
- Lead II [air, non-urban air or from high stacks]: 9.52192e-12 kg; lognormal variance with pedigree 1.8621, pedigree (1,1,4,1,1)
  (same comment as for Aluminium III)
- Magnesium [air, non-urban air or from high stacks]: 7.93442e-8 kg; lognormal variance with pedigree 1.0694, pedigree (1,1,4,1,1)
  (same comment as for Aluminium III)
- Manganese II [air, non-urban air or from high stacks]: 1.546e-8 kg; lognormal variance with pedigree 1.0563, pedigree (1,1,4,1,1)
  (same comment as for Aluminium III)
- Mercury II [air, non-urban air or from high stacks]: 1.19701e-9 kg; lognormal variance with pedigree 1.0615, pedigree (1,1,4,1,1)
  (same comment as for Aluminium III)
- Methane, fossil [air, non-urban air or from high stacks]: 0.000474574 kg; lognormal variance with pedigree 0.16376, pedigree (1,1,4,1,1)
  (same comment as for Aluminium III)
- Methane, non-fossil [air, non-urban air or from high stacks]: 0.0180056 kg; lognormal variance with pedigree 0.16376, pedigree (1,1,4,1,1)
  (same comment as for Aluminium III)
- Molybdenum VI [air, non-urban air or from high stacks]: 2.62123e-11 kg; lognormal variance with pedigree 1.5864, pedigree (1,1,4,1,1)
  (same comment as for Aluminium III)
- NMVOC, non-methane volatile organic compounds [air, non-urban air or from high stacks]: 1.64372e-7 kg; lognormal variance with pedigree 0.16376, pedigree (1,1,4,1,1)
  (same comment as for Aluminium III)
- Nickel II [air, non-urban air or from high stacks]: 2.85405e-11 kg; lognormal variance with pedigree 1.6088, pedigree (1,1,4,1,1)
  (same comment as for Aluminium III)
- Nitrogen oxides [air, non-urban air or from high stacks]: 6.04253e-6 kg
  Emission from direct release or combustion of landfill biogas.
- Particulate Matter, < 2.5 um [air, non-urban air or from high stacks]: 2.91676e-6 kg; lognormal variance with pedigree 0.4244, pedigree (1,1,4,1,1)
  (same comment as for Aluminium III)
- Potassium I [air, non-urban air or from high stacks]: 9.52105e-8 kg; lognormal variance with pedigree 1.0438, pedigree (1,1,4,1,1)
  (same comment as for Aluminium III)
- Scandium [air, non-urban air or from high stacks]: 1.44008e-11 kg; lognormal variance with pedigree 1.6248, pedigree (1,1,4,1,1)
  (same comment as for Aluminium III)
- Selenium IV [air, non-urban air or from high stacks]: 1.11035e-11 kg; lognormal variance with pedigree 1.6669, pedigree (1,1,4,1,1)
  (same comment as for Aluminium III)
- Silicon [air, non-urban air or from high stacks]: 5.32442e-9 kg; lognormal variance with pedigree 1.4286, pedigree (1,1,4,1,1)
  (same comment as for Aluminium III)
- Silver I [air, non-urban air or from high stacks]: 1.94992e-12 kg; lognormal variance with pedigree 1.9915, pedigree (1,1,4,1,1)
  (same comment as for Aluminium III)
- Sodium [air, non-urban air or from high stacks]: 1.69528e-7 kg; lognormal variance with pedigree 0.92784, pedigree (1,1,4,1,1)
  (same comment as for Aluminium III)
- Strontium [air, non-urban air or from high stacks]: 6.02997e-10 kg; lognormal variance with pedigree 1.4353, pedigree (1,1,4,1,1)
  (same comment as for Aluminium III)
- Sulfur dioxide [air, non-urban air or from high stacks]: 6.65315e-5 kg
  Emission from direct release or combustion of landfill biogas.
- Thallium I [air, non-urban air or from high stacks]: 4.40137e-13 kg; lognormal variance with pedigree 2.0544, pedigree (1,1,4,1,1)
  (same comment as for Aluminium III)
- Tin ion [air, non-urban air or from high stacks]: 4.36138e-12 kg; lognormal variance with pedigree 1.9287, pedigree (1,1,4,1,1)
  (same comment as for Aluminium III)
- Titanium ion [air, non-urban air or from high stacks]: 2.32077e-10 kg; lognormal variance with pedigree 1.5389, pedigree (1,1,4,1,1)
  (same comment as for Aluminium III)
- Tungsten [air, non-urban air or from high stacks]: 5.48667e-12 kg; lognormal variance with pedigree 1.745, pedigree (1,1,4,1,1)
  (same comment as for Aluminium III)
- Vanadium V [air, non-urban air or from high stacks]: 9.27068e-11 kg; lognormal variance with pedigree 1.5317, pedigree (1,1,4,1,1)
  (same comment as for Aluminium III)
- Zinc II [air, non-urban air or from high stacks]: 1.05228e-9 kg; lognormal variance with pedigree 1.4985, pedigree (1,1,4,1,1)
  (same comment as for Aluminium III)
- Non-hazardous waste disposed [inventory indicator, waste]: 1 kg
  Inventory indicator for waste mass disposed in landfill. To be used in EN15804 "other data" results.
- Heat, waste [soil, industrial]: 0.920754 MJ
  Emission from short-term decomposition of waste.
- Aluminium III [water, ground-, long-term]: 6.307e-6 kg; lognormal variance with pedigree 0.28339, pedigree (1,1,4,1,1)
  Emissions from long-term leachate (>100a).
  Uncertainty: Uncertainty calculated from uncertainty of the waste composition of this waste, uncertainty in waste decomposition and short-term leaching in landfill
- Ammonium [water, ground-, long-term]: 4.48679e-12 kg; lognormal variance with pedigree 2.0362, pedigree (1,1,4,1,1)
  (same comment as for Aluminium III)
- Antimony ion [water, ground-, long-term]: 4.58041e-8 kg; lognormal variance with pedigree 2.3036, pedigree (1,1,4,1,1)
  (same comment as for Aluminium III)
- Arsenic ion [water, ground-, long-term]: 7.14668e-8 kg; lognormal variance with pedigree 1.5751, pedigree (1,1,4,1,1)
  (same comment as for Aluminium III)
- BOD5, Biological Oxygen Demand [water, ground-, long-term]: 0.00937274 kg; lognormal variance with pedigree 0.12588, pedigree (1,1,4,1,1)
  Emissions from long-term leachate (>100a).
  Uncertainty: Uncertainty calculated from uncertainty of the waste composition of this waste, uncertainty in waste decomposition and short-term leaching in landfill.
- Barium II [water, ground-, long-term]: 2.36626e-5 kg; lognormal variance with pedigree 0.1895, pedigree (1,1,4,1,1)
  (same comment as for Aluminium III)
- Beryllium II [water, ground-, long-term]: 3.8577e-8 kg; lognormal variance with pedigree 0.84753, pedigree (1,1,4,1,1)
  (same comment as for Aluminium III)
- Boron [water, ground-, long-term]: 5.9961e-15 kg; lognormal variance with pedigree 2.1265, pedigree (1,1,4,1,1)
  (same comment as for Aluminium III)
- COD, Chemical Oxygen Demand [water, ground-, long-term]: 0.0395918 kg; lognormal variance with pedigree 0.12588, pedigree (1,1,4,1,1)
  (same comment as for Aluminium III)
- Cadmium II [water, ground-, long-term]: 2.95454e-7 kg; lognormal variance with pedigree 0.56667, pedigree (1,1,4,1,1)
  (same comment as for Aluminium III)
- Calcium II [water, ground-, long-term]: 0.00995094 kg; lognormal variance with pedigree 0.0928, pedigree (1,1,4,1,1)
  (same comment as for Aluminium III)
- Chromium VI [water, ground-, long-term]: 2.53494e-8 kg; lognormal variance with pedigree 8.7967, pedigree (1,1,4,1,1)
  (same comment as for Aluminium III)
- Cobalt II [water, ground-, long-term]: 1.3413e-6 kg; lognormal variance with pedigree 0.39953, pedigree (1,1,4,1,1)
  (same comment as for Aluminium III)
- Copper ion [water, ground-, long-term]: 6.71853e-5 kg; lognormal variance with pedigree 0.21216, pedigree (1,1,4,1,1)
  (same comment as for Aluminium III)
- DOC, Dissolved Organic Carbon [water, ground-, long-term]: 0.0361982 kg; lognormal variance with pedigree 0.12588, pedigree (1,1,4,1,1)
  (same comment as for Aluminium III)
- Heat, waste [water, ground-, long-term]: 1.44556 MJ
  Emission from long-term decomposition of waste.
- Hydrogen sulfide [water, ground-, long-term]: 4.56453e-5 kg; lognormal variance with pedigree 0.105072, pedigree (1,1,4,1,1)
  (same comment as for Aluminium III)
- Iron ion [water, ground-, long-term]: 0.00678203 kg; lognormal variance with pedigree 0.13642, pedigree (1,1,4,1,1)
  (same comment as for Aluminium III)
- Lead II [water, ground-, long-term]: 8.05232e-6 kg; lognormal variance with pedigree 0.32331, pedigree (1,1,4,1,1)
  (same comment as for Aluminium III)
- Magnesium [water, ground-, long-term]: 0.000539818 kg; lognormal variance with pedigree 0.1094, pedigree (1,1,4,1,1)
  (same comment as for Aluminium III)
- Manganese II [water, ground-, long-term]: 2.81436e-5 kg; lognormal variance with pedigree 0.18655, pedigree (1,1,4,1,1)
  (same comment as for Aluminium III)
- Mercury II [water, ground-, long-term]: 6.86268e-8 kg; lognormal variance with pedigree 0.75539, pedigree (1,1,4,1,1)
  (same comment as for Aluminium III)
- Molybdenum VI [water, ground-, long-term]: 4.35488e-7 kg; lognormal variance with pedigree 0.81454, pedigree (1,1,4,1,1)
  (same comment as for Aluminium III)
- Nickel II [water, ground-, long-term]: 3.15886e-6 kg; lognormal variance with pedigree 0.33105, pedigree (1,1,4,1,1)
  (same comment as for Aluminium III)
- Nitrate [water, ground-, long-term]: 4.71858e-13 kg; lognormal variance with pedigree 2.0362, pedigree (1,1,4,1,1)
  (same comment as for Aluminium III)
- Nitrite [water, ground-, long-term]: 2.44204e-13 kg; lognormal variance with pedigree 2.0362, pedigree (1,1,4,1,1)
  (same comment as for Aluminium III)
- Nitrogen, organic bound [water, ground-, long-term]: 7.33336e-12 kg; lognormal variance with pedigree 2.0362, pedigree (1,1,4,1,1)
  (same comment as for Aluminium III)
- Phosphate [water, ground-, long-term]: 0.000859111 kg; lognormal variance with pedigree 1.966, pedigree (1,1,4,1,1)
  (same comment as for Aluminium III)
- Potassium I [water, ground-, long-term]: 0.000487303 kg; lognormal variance with pedigree 0.107924, pedigree (1,1,4,1,1)
  (same comment as for Aluminium III)
- Scandium [water, ground-, long-term]: 1.00803e-6 kg; lognormal variance with pedigree 0.40484, pedigree (1,1,4,1,1)
  (same comment as for Aluminium III)
- Selenium IV [water, ground-, long-term]: 1.28224e-7 kg; lognormal variance with pedigree 1.166, pedigree (1,1,4,1,1)
  (same comment as for Aluminium III)
- Silicon [water, ground-, long-term]: 9.58129e-6 kg; lognormal variance with pedigree 4.7412, pedigree (1,1,4,1,1)
  (same comment as for Aluminium III)
- Silver I [water, ground-, long-term]: 2.31619e-6 kg; lognormal variance with pedigree 0.40894, pedigree (1,1,4,1,1)
  (same comment as for Aluminium III)
- Sodium I [water, ground-, long-term]: 6.7828e-13 kg; lognormal variance with pedigree 2.0152, pedigree (1,1,4,1,1)
  (same comment as for Aluminium III)
- Strontium [water, ground-, long-term]: 6.67396e-5 kg; lognormal variance with pedigree 0.15752, pedigree (1,1,4,1,1)
  (same comment as for Aluminium III)
- Sulfate [water, ground-, long-term]: 0.00175105 kg; lognormal variance with pedigree 0.105072, pedigree (1,1,4,1,1)
  (same comment as for Aluminium III)
- TOC, Total Organic Carbon [water, ground-, long-term]: 0.0361982 kg; lognormal variance with pedigree 0.12588, pedigree (1,1,4,1,1)
  (same comment as for Aluminium III)
- Thallium I [water, ground-, long-term]: 4.87142e-8 kg; lognormal variance with pedigree 0.77667, pedigree (1,1,4,1,1)
  (same comment as for Aluminium III)
- Tin ion [water, ground-, long-term]: 4.91726e-6 kg; lognormal variance with pedigree 0.35285, pedigree (1,1,4,1,1)
  (same comment as for Aluminium III)
- Titanium ion [water, ground-, long-term]: 3.00255e-5 kg; lognormal variance with pedigree 0.24125, pedigree (1,1,4,1,1)
  (same comment as for Aluminium III)
- Tungsten [water, ground-, long-term]: 8.15666e-8 kg; lognormal variance with pedigree 1.0488, pedigree (1,1,4,1,1)
  (same comment as for Aluminium III)
- Vanadium V [water, ground-, long-term]: 1.10814e-6 kg; lognormal variance with pedigree 1.00218, pedigree (1,1,4,1,1)
  (same comment as for Aluminium III)
- Zinc II [water, ground-, long-term]: 0.000161873 kg; lognormal variance with pedigree 0.17834, pedigree (1,1,4,1,1)
  (same comment as for Aluminium III)
