# containerboard production, unspecified

Dataset: EcoSpold 2, unit process
Geography: US
Time period: 2014-01-01 to 2022-12-31
Technology level: current
Classification: ISIC rev.4 ecoinvent: 1702:Manufacture of corrugated paper and paperboard and of containers of paper a
Scenario: Business-as-Usual
System model: Substitution, consequential, long-term
Share of production covered: 70 %
Generated by: Caroline Gaudreault
Published in: NCASI 2017
Database: ecoinvent
isCopyrightProtected: true

## General comment
This dataset represents US-average containerboard. It consists of an average mix of kraftliner (50.7%), 100% recycled linerboard (16.1%), semichemical corrugating medium (18.8%) and 100% recycled corrugating medium (14.4%). In ecoinvent "containerboard production, unspecified" in the US therefore corresponds to an average of "containerboard production, kraftliner", "containerboard production, testliner", "containerboard production, semichemical fluting", "containerboard production, recycled fluting" in other geographies.
Containerboard is the umbrella term for two different types of board, linerboard and fluting medium, which are both required to produce corrugated board. Linerboard is a flat layer of board, which can be further distinguished in kraftliner and testliner, depending on whether it is of virgin or recycled origin, respectively. Fluting medium is the corrugated middle layer between a top and bottom layer of linerboard. Together all three layers constitute corrugated board. Virgin fluting medium is commonly called semichemical fluting, while recycled fluting can also be called wellenstoff. Because US data do not allow separate inventories for the distinct types an unspecified containerboard was introduced.

## Included activities start
The process for the production of containerboard starts with the reception of purchased pulps, recovered paper, wood and wood chips at the mill gate.

## Included activities end
Processes include chipping, screening of chips, cooking to pulp for (kraft cooking process), which is a highly alkaline cooking process with caustic soda and sodium sulphide as active cooking chemicals. Pulp is also made from repulping waste paper. The pulp produced is defiberized in refiners, screened and washed before being sent to the paper machines. The stock passes through one or two head boxes onto the paper machine and then is dried. Activity ends at the gate of the containerboard mill

## Geography
Data for main producers in the US.

## Technology
Average of present used technology

## Time period
Production volume is from 2014.

## Parameters
- biological oxygen demand 5 emissions: 0.0008831 kg; name bod5_emissions
  BOD5 emissions to water

## Reference product
- containerboard, unspecified: 1 kg; name containerboard; = 1.1052/1.1052; By-product classification allocatable product; CPC 321: Pulp, paper and paperboard
  Unspecified mix of corrugating medium (fluting) and linerboard. All values were reported per 1.1052 kg of containerboard and are reported here per 1 kg.
  production volume 3.20936e10 kg
    The American Forest and Paper Association (AF&PA) reported 2014 production volume. http://www.afandpa.org/media/news/-in-category/categories/statistics
  property carbon content, non-fossil 0.496
    0.496 kg carbon/kg dry containerboard. Assumed to be 100% non-fossil.
  property heating value, net 15.92 MJ; name containerboard_Net_Heat_Value
    Assumed equal to "waste paperboard"
  property price 0.598 EUR2005
    Export prices for the World+ according to: http://faostat.fao.org/site/626/DesktopDefault.aspx?PageID=626#ancor downloaded 28 April 2009; calculated as export value divided by export volume.
  properties: carbon allocation 0.455328 kg, carbon content 0.496, dry mass 0.918 kg, water content 0.0893246, water in wet mass 0.082 kg, wet mass 1 kg

## Inputs from technosphere
- aluminium sulfate, powder: 0.00241947 kg; = 0.002674/1.1052; source FEFCO 2009; lognormal variance with pedigree 0.0027, pedigree (1,2,3,1,1)
  Aluminium sulfate.
  properties: dry mass 1 kg, wet mass 1 kg
- bark chips, wet, measured as dry mass: 0.108523 kg; = 0.11994/1.1052; lognormal variance with pedigree 0.0027, pedigree (1,2,3,1,1)
  Proxy for purchased woody manufacturing residues. Encompasses wood residues from wood plants (mainly sawmills) and includes mainly bark.
  properties: carbon content, non-fossil 0.494, dry mass 1 kg, heating value, net 4.81 MJ, water content 1.4, wet mass 2.4 kg
- deinked pulp, wet lap: 0.00376312 kg; = 0.004159/1.1052; lognormal variance with pedigree 0.0027, pedigree (1,2,3,1,1)
  Proxy for non-deinked pulp.
  properties: carbon content, non-fossil 0.494, dry mass 0.6 kg, heating value, net 8 MJ, water content 0.666667, wet mass 1 kg
- diesel: 0.00489468 kg; = 6.44E-3*0.84/1.1052; lognormal variance with pedigree 0.0027, pedigree (1,2,3,1,1)
  Reported: 6.44E-3 L, EI density: 0.84 kg/L. Combustion emissions (w/ exception of CO2, CH4, N2O, NOx and SOx) modelled using Heat, district or industrial, other than natural gas {CA-QC}| heat production, light fuel oil, at industrial furnace 1MW | Cut-off, U.
  property calculation property, kg 0 kg; name m_diesel
  properties: carbon content, fossil 0.865, dry mass 1 kg, heating value, net 42.8 MJ, wet mass 1 kg
  note on calculation property, kg: Mass output. Defined here for use in the combined production calculations.
  note on carbon content, fossil: C-content of diesel is 86.5% (ecoinvent v2.2 report 6_IV, Tab 3.14)
- electricity, high voltage: 0.000131861 kWh; = 0.003532*0.2777778*0.1344; lognormal variance with pedigree 0.0027, pedigree (1,2,3,1,1)
  Hydropower from dedicated run-of-river-plant. Reported in MJ. The total amount was split in over tree exchanges, each one with an activity link to electricity production from hydro, run-of-river plants in one of the three US electricity grid areas. The total amount was multiplied with the share of electricity production from hydro, run-of-river per grid area in the total hydro, run-of-river electricity prodcution in the US: MRO grid 0.528, NPCC grid 0.1344, WECC grid 0.8128.
- electricity, high voltage: 5.18027e-5 kWh; = 0.003532*0.2777778*0.0528; lognormal variance with pedigree 0.0027, pedigree (1,2,3,1,1)
  Hydropwoer from dedicated run-of-river-plant. Reported in MJ. The total amount was split in over tree exchanges, each one with an activity link to electricity production from hydro, run-of-river plants in one of the three US electricity grid areas. The total amount was multiplied with the share of electricity production from hydro, run-of-river per grid area in the total hydro, run-of-river electricity prodcution in the US: MRO grid 0.528, NPCC grid 0.1344, WECC grid 0.8128.
- electricity, high voltage: 0.000797447 kWh; = 0.003532*0.2777778*0.8128; lognormal variance with pedigree 0.0027, pedigree (1,2,3,1,1)
  (same comment as for electricity, high voltage)
- electricity, medium voltage: 0.401602 kWh; name soldP; = (0.071718*0.2777778)/1.1052; source FEFCO 2009
  Surplus electricity (cogeneration) sold as byproduct.
  production volume
    Calculated from production volume of reference flow.
  property exergy -0.161581 MJ; name electricityCoproductAmount_exergy
  property true value relation -0.161581; name electricityCoproductAmount_true_value_re
  properties: price -0.00448837 EUR2005
  note on exergy: This exergy property is based on the exergy content of the product.
- hard coal ash: -0.00575461 kg; name ash_coal_LF; = 0.00636/1.1052; lognormal variance with pedigree 0.0012, pedigree (1,3,1,1,1)
  Ash from coal combustion.
  production volume
    Calculated from production volume of reference product using the relative outputs.
  properties: dry mass 1 kg, wet mass 1 kg
- hard coal briquettes: 1.10379 MJ; = 0.038793/0.0318/1.1052; lognormal variance with pedigree 0.0027, pedigree (1,2,3,1,1)
  Hard coal used for bituminous coal. Reported: 0.038793 kg, EI: 0.0318 kg/MJ. Combustion emissions (w/ exception of NOx, SOx, CO2, N2O and CH4) modelled using Heat, central or small-scale, other than natural gas {RoW}| heat production, hard coal briquette, stove 5-15kW | Cut-off, U.
  properties: carbon content, fossil 0.833333, dry mass 0.0305732 kg, water content 0.0416667, wet mass 0.0318471 kg
- heat, district or industrial, other than natural gas: 0.701231 MJ; = 0.775/1.1052; lognormal variance with pedigree 0.0027, pedigree (1,2,3,1,1)
  Purchased steam. From cogeneration. Mainly from coal (>90%).
  properties: corresponding fuel use, propane, furnace >100kW 1.05263 MJ, heating value, net 1 MJ
  note on corresponding fuel use, propane, furnace >100kW: Lower heating value of the fuel input related to the heat/electricity output, taken directly from ecoinvent v3.0 dataset "heat production, natural gas, at industrial furnace >100kW, GLO 2000".
- heavy fuel oil: 0.00237061 kg; = 2.62E-3*1/1.1052; lognormal variance with pedigree 0.0027, pedigree (1,2,3,1,1)
  Reported 2.62E-3 L, EI density: 1 kg/L. Combustion emissions (w/ exception of CO2, CH4, N2O, NOx and SOx) modelled using Heat, district or industrial, other than natural gas {CA-QC}| heat production, heavy fuel oil, at industrial furnace 1MW | Cut-off, U.
  property calculation property, kg 0 kg; name m_hfo
  properties: carbon content, fossil 0.849, dry mass 1 kg, heating value, net 41.2 MJ, wet mass 1 kg
- limestone, crushed, for mill: 0.00499729 kg; = 0.005523/1.1052; lognormal variance with pedigree 0.0027, pedigree (1,2,3,1,1)
  Proxy for unspecified fillers.
  properties: carbon content, fossil 0.117492, dry mass 0.998 kg, water content 0.00200401, wet mass 1 kg
- maize starch: 0.00490409 kg; = 0.00542/1.1052; source FEFCO 2009; lognormal variance with pedigree 0.0027, pedigree (1,2,3,1,1)
  Starch, unspecified.
  properties: carbon content, non-fossil 0.46, dry mass 0.86 kg, heating value, net 11.64 MJ, water content 0.16279, wet mass 1 kg
- municipal solid waste: -0.044116 kg; name others; = (0.006308+0.033407+0.007604+0.001438)/1.1052; lognormal variance with pedigree 0.0027, pedigree (1,2,3,1,1)
  Proxy for other waste from pulp and paper mills. Includes: woodyard wastes, construction and demolition debris, grits and dregs, alum sludge, etc.
  production volume
    Calculated from production volume of reference product using the relative outputs.
  properties: carbon content, fossil 0.171549, carbon content, non-fossil 0.261655, dry mass 0.771 kg, heating value, net 11.74 MJ, water content 0.297017, wet mass 1 kg
  note on carbon content, fossil: MSW composition in tab 4.1, ecoinvent v2.2 report 13_I. C content referred to 1 kg DM
  note on heating value, net: Value taken from the general comment of the treatment dataset.
- natural gas, high pressure: 0.0982356 m3; = 0.10857/1.1052; lognormal variance with pedigree 0.0027, pedigree (1,2,3,1,1)
  Reported. Combustion emissions (w/ exception of CO2, CH4, N2O, NOx and SOx) modelled using Heat, district or industrial, natural gas {CA-QC}| heat production, natural gas, at industrial furnace >100kW | Cut-off, U.
  properties: carbon content, fossil 0.602381, dry mass 0.84 kg, heating value, net 39 MJ, wet mass 0.84 kg
  note on carbon content, fossil: An average C content of 0.506 kg C/ m3 has been assumed (this average has been calculated using data in Tab 3.5, ecoinvent v2.2 report 6_V
  note on heating value, net: Literature value, Source: United Nations Statistics Division (2018) International Recommendations for Energy Statistics (IRES). Available at: http://unstats.un.org/unsd/statcom/doc11/BG-IRES.pdf.
- paper mill, integrated: 5.44e-11 unit; lognormal variance with pedigree 0.1786, pedigree (4,5,5,5,5)
  Assumed same as European data.
- petroleum: 7.80402e-6 kg; = 1.15E-5*0.75/1.1052; lognormal variance with pedigree 0.0027, pedigree (1,2,3,1,1)
  Gasoline. Reported:1.15E-05 L, EI density: 0.75 kg/L. Combustion emissions (w/ exception of CO2, CH4, N2O, NOx and SOx) modelled using Heat, district or industrial, other than natural gas {CA-QC}| heat production, light fuel oil, at industrial furnace 1MW | Cut-off, U.
  properties: carbon content, fossil 0.85, dry mass 1 kg, heating value, net 43.2 MJ, wet mass 1 kg
- pitch despergents, in paper production: 5.42888e-5 kg; = 6e-5/1.1052; lognormal variance with pedigree 0.0033, pedigree (2,2,3,1,1)
  Pitch dispersants. Reported.
  properties: carbon content, fossil 0.290994, dry mass 1 kg, heating value, net 8.82 MJ, wet mass 1 kg
- polyacrylamide: 0.000638798 kg; = 0.000706/1.1052; lognormal variance with pedigree 0.0027, pedigree (1,2,3,1,1)
  Proxy for strength agents.
  properties: carbon content, fossil 0.51, dry mass 1 kg, heating value, net 23.88 MJ, wet mass 1 kg
- propane: 4.97647e-5 kg; = 1.10E-4*0.5/1.1052; lognormal variance with pedigree 0.0027, pedigree (1,2,3,1,1)
  LPG. Reported: 1.10E-4, Assumed density: 0.5 kg/L. Combustion emissions (w/ exception of CO2, CH4, N2O, NOx and SOx) modelled using Heat, district or industrial, natural gas {CA-QC}| heat production, natural gas, at industrial furnace >100kW | Cut-off, U.
  properties: carbon content, fossil 0.272379, dry mass 1 kg, heating value, net 46.4 MJ, wet mass 1 kg
  note on heating value, net: Indicative value. Reference: Fuels - Higher and Lower Calorific Values, available at: https://www.engineeringtoolbox.com/fuels-higher-calorific-values-d_169.html
- pulpwood, hardwood, measured as solid wood under bark: 0.000198906 m3; = (0.119+0.02389)/650/1.1052; lognormal variance with pedigree 0.0027, pedigree (1,2,3,1,1)
  Total weight of northern and southern hardwood pulpwood used in containerboard production. Includes weight of bark and assumes a density of 650 kg/m3. Northern: 16.6%, southern: 83.4%
  properties: basic wood density 650, carbon content, non-fossil 0.494, dry mass 650 kg, heating value, net 6071.3 MJ, water content 0.8, wet mass 1170 kg
  note on heating value, net: Value based on "hardwood forestry, mixed species, sustainable forest management"The property is based on a value of 11.58MJ/kg
- pulpwood, softwood, measured as solid wood under bark: 0.00116633 m3; = 0.5800623/450/1.1052; lognormal variance with pedigree 0.0027, pedigree (1,2,3,1,1)
  Total weight of southern softwood pulpwood used in containerboard production. Includes weight of bark and assumes a density of 450 kg/m3.
  properties: basic wood density 450, carbon content, non-fossil 0.494, dry mass 450 kg, heating value, net 4483.78 MJ, water content 0.8, wet mass 810 kg
  note on heating value, net: Value based on "softwood forestry, mixed species, sustainable forest management"The property is based on a value of 11.58MJ/kg
- quicklime, milled, loose: 0.00813916 kg; = 0.0089954/1.1052; source FEFCO 2009; lognormal variance with pedigree 0.0027, pedigree (1,2,3,1,1)
  Quicklime.
  properties: dry mass 0.99 kg, water content 0.010101, wet mass 1 kg
- sludge from pulp and paper production: -0.0283207 kg; name sludge_LF; = 0.0313/1.1052; lognormal variance with pedigree 0.0027, pedigree (1,2,3,1,1)
  WWTP residuals.
  production volume
    Calculated from production volume of reference product using the relative outputs.
  properties: carbon content, non-fossil 0.21, dry mass 0.75 kg, heating value, net 2.65 MJ, water content 0.333333, wet mass 1 kg
- soda ash, dense: 0.00329352 kg; = 0.00364/1.1052; lognormal variance with pedigree 0.0027, pedigree (1,2,3,1,1)
  Proxy for soda.
  properties: carbon content, fossil 0.113208, dry mass 1 kg, heating value, net 3.43 MJ, wet mass 1 kg
- sodium hydroxide, without water, in 50% solution state: 0.00695802 kg; = 0.00769/1.1052; source FEFCO 2009; lognormal variance with pedigree 0.0032, pedigree (1,3,3,1,1)
  Caustic
  properties: dry mass 1 kg, heating value, net 3.03 MJ, wet mass 1 kg
- sulfate pulp, bleached: 0.00065418 kg; = 0.000723/1.1052; lognormal variance with pedigree 0.0033, pedigree (2,2,3,1,1)
  Input of purchased bleached kraft market pulp.
  properties: carbon content, non-fossil 0.494, dry mass 0.9 kg, heating value, net 13.23 MJ, water content 0.111111, wet mass 1 kg
  note on carbon content, non-fossil: C content of dry mass of sulfate pulp is 0.494 kgC/kg dry wood (ecoinvent v2.2 report 6_IX & ecoinvent v2.2 report 9). No other C containing products in the formulation of the pulp.
- sulfate pulp, unbleached: 0.000114911 kg; = 0.000127/1.1052; lognormal variance with pedigree 0.0033, pedigree (2,2,3,1,1)
  Input of purchased unbleached kraft market pulp.
  properties: carbon content, non-fossil 0.494, dry mass 0.9 kg, heating value, net 13.23 MJ, price 0.355 EUR2005, water content 0.111111, wet mass 1 kg
- sulfuric acid: 0.010589 kg; = 0.011703/1.1052; source FEFCO 2009; lognormal variance with pedigree 0.0027, pedigree (1,2,3,1,1)
  Sulfuric acid
  properties: dry mass 1 kg, wet mass 1 kg
- tall oil, crude: -0.0140771 kg; name TO; = 0.015558/1.1052; lognormal variance with pedigree 0.0428, pedigree (5,2,3,3,1)
  Co-product from pulp production that is sold for other purposes. Estimated based on existing data.
  production volume
    Calculated from production volume of reference product using the relative outputs.
  property carbon content, fossil 0; name TO_C_content_fossil
  property carbon content, non-fossil 0.786; name TO_C_content_non_fossil
  properties: dry mass 1 kg, heating value, net 23.82 MJ, price 0.652995 EUR2005, wet mass 1 kg
- transport, freight train: 0.0642997 metric ton*km; = (0.098048+0.222834+0.056057+0.047577)/0.5/1000*0.05*1674/1.1052; lognormal variance with pedigree 0.131225, pedigree (2,5,3,2,2)
  Transportation of wet wood chips (50% water). Modes and distances from the 2012 U.S. Commodity Flow Survey (published in 2015), Truck: 94.5%, 299 km, Train: 5.5%, 1674 km),
- transport, freight, lorry, unspecified: 0.217063 metric ton*km; = (0.098048+0.222834+0.056057+0.047577)/0.5/1000*0.945*299/1.1052; lognormal variance with pedigree 0.131225, pedigree (2,5,3,2,2)
  (same comment as for transport, freight train)
- turpentine: -0.00109301 kg; name TURP; = 0.001208/1.1052; lognormal variance with pedigree 0.0428, pedigree (5,2,3,3,1)
  (same comment as for tall oil, crude)
  production volume
    Calculated from production volume of reference product using the relative outputs.
  property carbon content, fossil 0; name TURP_C_content_fossil
  property carbon content, non-fossil 0.882353; name TURP_C_content_non_fossil
  properties: dry mass 1 kg, heating value, net 26.74 MJ, price 1.826 EUR2005, wet mass 1 kg
- waste paper, sorted: 0.0101339 kg; = 0.0112/1.1052; lognormal variance with pedigree 0.0027, pedigree (1,2,3,1,1)
  Proxy for recovered mixed paper.
  properties: carbon content, non-fossil 0.448889, dry mass 0.9 kg, heating value, net 14.11 MJ, water content 0.111111, wet mass 1 kg
- waste paperboard, sorted: 0.504886 kg; = 0.558/1.1052; lognormal variance with pedigree 0.0033, pedigree (2,2,3,1,1)
  Proxy for old corrugated containers.
  properties: carbon content, non-fossil 0.483259, dry mass 0.804 kg, heating value, net 15.92 MJ, water content 0.243781, wet mass 1 kg
- wood ash mixture, pure: -0.0209935 kg; name ash_wood_LA; = 0.023202/1.1052; lognormal variance with pedigree 0.0007, pedigree (1,2,1,1,1)
  Ash from wood combustion.
  production volume
    Calculated from production volume of reference product using the relative outputs.
  properties: carbon content, non-fossil 0.012, dry mass 1 kg, wet mass 1 kg
- wood chips, from post-consumer wood, measured as dry mass: 0.0127799 kg; = 0.0070623/1.1052+0.007062/1.1052; lognormal variance with pedigree 0.0027, pedigree (1,2,3,1,1)
  Proxy for unspecified biomass burned in pulp and paper mill. Combustion emissions modeled using NCASI proprietary information.
  properties: carbon content, non-fossil 0.494, dry mass 1 kg, heating value, net 9.99 MJ, water content 0.4, wet mass 1.4 kg
- wood chips, wet, measured as dry mass: 0.396945 kg; = (0.098048+.222834)/1.1052
  Wood chips from wood products manufacturing. Softwood species. Northern species: 30.5%, southern species: 69.5%.
  properties: carbon content, non-fossil 0.494, dry mass 1 kg, heating value, net 10.84 MJ, water content 0.7, wet mass 1.7 kg
  note on heating value, net: Value based on the dataset 'softwood forestry, mixed species, sustainable forest management'
- wood chips, wet, measured as dry mass: 0.00295262 kg; = 0.014188/1.1052*0.23; lognormal variance with pedigree 0.0028, pedigree (1,2,3,3,1)
  Forest residues purchased or from owned operations. Not a by-product from wood product production. Unspecified mix of hardwood and softwood. The mix is represented by wood chips inputs from the following activities: “hardwood forestry, birch, sustainable forest management”, “softwood forestry, pine, sustainable forest management”, and “softwood forestry, spruce, sustainable forest management” with shares of 0.55, 0.22, and 0.23. Shares are based on the shares of the "market for wood chips, wet, measured as dry mass, ROW"
  properties: carbon content, non-fossil 0.494, dry mass 1 kg, heating value, net 10.84 MJ, water content 1.1, wet mass 2.1 kg
- wood chips, wet, measured as dry mass: 0.00706062 kg; = 0.014188/1.1052*0.55; lognormal variance with pedigree 0.0028, pedigree (1,2,3,3,1)
  (same comment as for wood chips, wet, measured as dry mass)
- wood chips, wet, measured as dry mass: 0.00282425 kg; = 0.014188/1.1052*0.22; lognormal variance with pedigree 0.0028, pedigree (1,2,3,3,1)
  (same comment as for wood chips, wet, measured as dry mass)

## Inputs from nature
- Oxygen [natural resource, in air]: 1.02734 kg; = (CO2_fossil+CO2_non_fossil)/(16*2+12) * (16*2) + (CO_fossil)/(16+12) *16; lognormal variance with pedigree 0.0033, pedigree (2,2,3,1,1)
  Oxygen is required for the combustion process. Calculated value
- Water, unspecified natural origin [natural resource, in water]: 0.0280609 m3; = 31.01291/1000/1.1052; lognormal variance with pedigree 0.0007, pedigree (1,2,1,1,1)
  Water input. Includes process and cooling water. kg converted to m3.

## Emissions to nature
- Acenaphthene [air, unspecified]: 1.08578e-7 kg; = 1.2e-7/1.1052; lognormal variance with pedigree 0.0434, pedigree (2,2,3,3,2)
  Combustion and process emission. Modelled using a mix of NCASI, ecoinvent, and US EPA data. For more details see "Extrapolations" comment.
- Acetaldehyde [air, unspecified]: 4.23453e-5 kg; = 4.68e-5/1.1052; lognormal variance with pedigree 0.0434, pedigree (2,2,3,3,2)
  (same comment as for Acenaphthene)
- Acetic acid [air, unspecified]: 6.32465e-7 kg; = 6.99e-7/1.1052; lognormal variance with pedigree 0.0434, pedigree (2,2,3,3,2)
  (same comment as for Acenaphthene)
- Acetone [air, unspecified]: 8.0076e-5 kg; = 8.85e-5/1.1052; lognormal variance with pedigree 0.0434, pedigree (2,2,3,3,2)
  (same comment as for Acenaphthene)
- Acrolein [air, unspecified]: 2.97684e-6 kg; = 3.29e-6/1.1052; lognormal variance with pedigree 0.0434, pedigree (2,2,3,3,2)
  (same comment as for Acenaphthene)
- Aluminium III [air, unspecified]: 5.22e-5 kg; = 5.22e-05; lognormal variance with pedigree 0.6534, pedigree (2,2,3,3,2)
  (same comment as for Acenaphthene)
- Ammonia [air, unspecified]: 6.09844e-5 kg; = 6.74e-5/1.1052; lognormal variance with pedigree 0.0434, pedigree (2,2,3,3,2)
  (same comment as for Acenaphthene)
- Antimony ion [air, unspecified]: 1.14911e-8 kg; = 1.27e-8/1.1052; lognormal variance with pedigree 0.6534, pedigree (2,2,3,3,2)
  (same comment as for Acenaphthene)
- Arsenic ion [air, unspecified]: 1.30293e-7 kg; = 1.44e-7/1.1052; lognormal variance with pedigree 0.6534, pedigree (2,2,3,3,2)
  (same comment as for Acenaphthene)
- Barium II [air, unspecified]: 6.72277e-7 kg; = 7.43e-7/1.1052; lognormal variance with pedigree 0.6534, pedigree (2,2,3,3,2)
  (same comment as for Acenaphthene)
- Benzene [air, unspecified]: 1.08578e-5 kg; = 1.2e-5/1.1052; lognormal variance with pedigree 0.0434, pedigree (2,2,3,3,2)
  (same comment as for Acenaphthene)
- Benzene, hexachloro- [air, unspecified]: 5.99891e-9 kg; = 6.63e-9/1.1052; lognormal variance with pedigree 0.0434, pedigree (2,2,3,3,2)
  (same comment as for Acenaphthene)
- Benzene, pentachloro- [air, unspecified]: 6.20702e-13 kg; = 6.86e-13/1.1052; lognormal variance with pedigree 0.0434, pedigree (2,2,3,3,2)
  (same comment as for Acenaphthene)
- Benzo(a)pyrene [air, unspecified]: 5.08505e-8 kg; = 5.62e-8/1.1052; lognormal variance with pedigree 0.0434, pedigree (2,2,3,3,2)
  (same comment as for Acenaphthene)
- Beryllium II [air, unspecified]: 1.03149e-8 kg; = 1.14e-8/1.1052; lognormal variance with pedigree 0.6534, pedigree (2,2,3,3,2)
  (same comment as for Acenaphthene)
- Boron [air, unspecified]: 1.01339e-6 kg; = 1.12e-6/1.1052; lognormal variance with pedigree 0.6534, pedigree (2,2,3,3,2)
  (same comment as for Acenaphthene)
- Bromine [air, unspecified]: 4.18024e-8 kg; = 4.62e-8/1.1052; lognormal variance with pedigree 0.0434, pedigree (2,2,3,3,2)
  (same comment as for Acenaphthene)
- Butadiene [air, unspecified]: 1.10387e-7 kg; = 1.22e-7/1.1052; lognormal variance with pedigree 0.0434, pedigree (2,2,3,3,2)
  (same comment as for Acenaphthene)
- Butane [air, unspecified]: 2.75063e-6 kg; = 3.04e-6/1.1052; lognormal variance with pedigree 0.0434, pedigree (2,2,3,3,2)
  (same comment as for Acenaphthene)
- Cadmium II [air, unspecified]: 2.24394e-7 kg; = 2.48e-7/1.1052; lognormal variance with pedigree 0.6534, pedigree (2,2,3,3,2)
  (same comment as for Acenaphthene)
- Calcium [air, unspecified]: 5.57365e-6 kg; = 6.16e-6/1.1052; lognormal variance with pedigree 0.0434, pedigree (2,2,3,3,2)
  (same comment as for Acenaphthene)
- Carbon dioxide, fossil [air, unspecified]: 0.299493 kg; name CO2_fossil; = 0.331/1.1052; lognormal variance with pedigree 0.0033, pedigree (2,2,3,1,1)
  Combustion and other process activities. Quantity calculated using fuels reported by mills and US specific emission factors.
- Carbon dioxide, non-fossil [air, unspecified]: 1.11292 kg; name CO2_non_fossil; = 1.23/1.1052; lognormal variance with pedigree 0.0033, pedigree (2,2,3,1,1)
  Combustion and other process activities. Quantity calculated using fuesl reported by mills and US specific emission factors.
- Carbon disulfide [air, unspecified]: 2.92255e-6 kg; = 3.23e-6/1.1052; lognormal variance with pedigree 0.0434, pedigree (2,2,3,3,2)
  (same comment as for Acenaphthene)
- Carbon monoxide, fossil [air, unspecified]: 0.000232537 kg; name CO_fossil; = 2.57E-4/1.1052; lognormal variance with pedigree 0.6527, pedigree (2,2,3,1,1)
  Proxy for combined fossil/non-fossil. Combustion and other process activities. Quantity calculated using fuels reported by mills and US specific emission factors.
- Chlorine [air, unspecified]: 1.42961e-7 kg; = 1.58e-7/1.1052; lognormal variance with pedigree 0.0434, pedigree (2,2,3,3,2)
  (same comment as for Acenaphthene)
- Chloroethylene [air, unspecified]: 1.57438e-7 kg; = 1.74e-7/1.1052; lognormal variance with pedigree 0.0434, pedigree (2,2,3,3,2)
  (same comment as for Acenaphthene)
- Chloroform [air, unspecified]: 3.09446e-6 kg; = 3.42e-6/1.1052; lognormal variance with pedigree 0.0434, pedigree (2,2,3,3,2)
  (same comment as for Acenaphthene)
- Chromium III [air, unspecified]: 7.66377e-8 kg; = 8.47e-8/1.1052; lognormal variance with pedigree 0.6534, pedigree (2,2,3,3,2)
  (same comment as for Acenaphthene)
- Chromium VI [air, unspecified]: 7.36518e-8 kg; = 8.14e-8/1.1052; lognormal variance with pedigree 0.6534, pedigree (2,2,3,3,2)
  (same comment as for Acenaphthene)
- Cobalt II [air, unspecified]: 3.16685e-8 kg; = 3.5e-8/1.1052; lognormal variance with pedigree 0.6534, pedigree (2,2,3,3,2)
  (same comment as for Acenaphthene)
- Copper ion [air, unspecified]: 8.05284e-7 kg; = 8.9e-7/1.1052; lognormal variance with pedigree 0.6534, pedigree (2,2,3,3,2)
  (same comment as for Acenaphthene)
- Cumene [air, unspecified]: 1.99059e-6 kg; = 2.2e-6/1.1052; lognormal variance with pedigree 0.0434, pedigree (2,2,3,3,2)
  (same comment as for Acenaphthene)
- Cyanide [air, unspecified]: 3.04017e-8 kg; = 3.36e-8/1.1052; lognormal variance with pedigree 0.0434, pedigree (2,2,3,3,2)
  (same comment as for Acenaphthene)
- Dinitrogen monoxide [air, unspecified]: 4.53312e-5 kg; = 5.01e-5/1.1052; lognormal variance with pedigree 0.0427, pedigree (2,2,3,1,1)
  (same comment as for Carbon dioxide, fossil)
- Dioxins, measured as 2,3,7,8-tetrachlorodibenzo-p-dioxin [air, unspecified]: 2.20775e-13 kg; = 2.44e-13/1.1052; lognormal variance with pedigree 0.3034, pedigree (2,2,3,3,2)
  (same comment as for Acenaphthene)
- Ethane [air, unspecified]: 1.65581e-5 kg; = 1.83e-5/1.1052; lognormal variance with pedigree 0.0434, pedigree (2,2,3,3,2)
  (same comment as for Acenaphthene)
- Ethane, 1,1,1-trichloro-, HCFC-140 [air, unspecified]: 1.34817e-7 kg; = 1.49e-7/1.1052; lognormal variance with pedigree 0.0434, pedigree (2,2,3,3,2)
  (same comment as for Acenaphthene)
- Ethanol [air, unspecified]: 2.88636e-8 kg; = 3.19e-8/1.1052; lognormal variance with pedigree 0.0434, pedigree (2,2,3,3,2)
  (same comment as for Acenaphthene)
- Ethylene [air, unspecified]: 3.31162e-5 kg; = 3.66e-5/1.1052; lognormal variance with pedigree 0.0434, pedigree (2,2,3,3,2)
  (same comment as for Acenaphthene)
- Ethyne [air, unspecified]: 5.51936e-6 kg; = 6.1e-6/1.1052; lognormal variance with pedigree 0.0434, pedigree (2,2,3,3,2)
  (same comment as for Acenaphthene)
- Formaldehyde [air, unspecified]: 1.692e-5 kg; = 1.87e-5/1.1052; lognormal variance with pedigree 0.0434, pedigree (2,2,3,3,2)
  (same comment as for Acenaphthene)
- Heat, waste [air, unspecified]: 0.048498 MJ; = 0.0536/1.1052; lognormal variance with pedigree 0.0842, pedigree (3,2,3,3,4)
  (same comment as for Acenaphthene)
- Hexane [air, unspecified]: 2.12631e-5 kg; = 2.35e-5/1.1052; lognormal variance with pedigree 0.0434, pedigree (2,2,3,3,2)
  (same comment as for Acenaphthene)
- Hydrocarbons, aliphatic, alkanes, unspecified [air, unspecified]: 5.67318e-6 kg; = 6.27e-6/1.1052; lognormal variance with pedigree 0.3053, pedigree (2,2,3,5,2)
  (same comment as for Acenaphthene)
- Hydrocarbons, aliphatic, unsaturated [air, unspecified]: 5.51936e-6 kg; = 6.1e-6/1.1052; lognormal variance with pedigree 0.3414, pedigree (2,2,5,3,2)
  (same comment as for Acenaphthene)
- Hydrocarbons, aromatic [air, unspecified]: 2.07202e-8 kg; = 2.29e-8/1.1052; lognormal variance with pedigree 0.3034, pedigree (2,2,3,3,2)
  (same comment as for Acenaphthene)
- Hydrochloric acid [air, unspecified]: 6.58704e-5 kg; = 7.28e-5/1.1052; lognormal variance with pedigree 0.0434, pedigree (2,2,3,3,2)
  (same comment as for Acenaphthene)
- Hydrogen fluoride [air, unspecified]: 1.60152e-5 kg; = 1.77e-5/1.1052; lognormal variance with pedigree 0.0434, pedigree (2,2,3,3,2)
  (same comment as for Acenaphthene)
- Hydrogen sulfide [air, unspecified]: 6.97611e-5 kg; = 7.71e-5/1.1052; lognormal variance with pedigree 0.0421, pedigree (1,2,3,1,1)
  Proxy for total reduced sulfur. Combustion and other process activities. Quantity reported by mills under study.
- Iodine [air, unspecified]: 5.02172e-8 kg; = 5.55e-8/1.1052; lognormal variance with pedigree 0.0434, pedigree (2,2,3,3,2)
  (same comment as for Acenaphthene)
- Iron ion [air, unspecified]: 1.98154e-5 kg; = 2.19e-5/1.1052; lognormal variance with pedigree 0.6534, pedigree (2,2,3,3,2)
  (same comment as for Acenaphthene)
- Lead II [air, unspecified]: 8.26095e-7 kg; = 9.13e-7/1.1052; lognormal variance with pedigree 0.6534, pedigree (2,2,3,3,2)
  (same comment as for Acenaphthene)
- Lead-210 [air, unspecified]: 0.000205188 kBq; = 0.226774/1000/1.1052; lognormal variance with pedigree 0.3034, pedigree (2,2,3,3,2)
  (same comment as for Acenaphthene)
- Magnesium [air, unspecified]: 1.75534e-5 kg; = 1.94e-5/1.1052; lognormal variance with pedigree 0.6534, pedigree (2,2,3,3,2)
  (same comment as for Acenaphthene)
- Manganese II [air, unspecified]: 5.8089e-7 kg; = 6.42e-7/1.1052; lognormal variance with pedigree 0.6534, pedigree (2,2,3,3,2)
  (same comment as for Acenaphthene)
- Mercury II [air, unspecified]: 8.64097e-8 kg; = 9.55e-8/1.1052; lognormal variance with pedigree 0.6534, pedigree (2,2,3,3,2)
  (same comment as for Acenaphthene)
- Methane, bromo-, Halon 1001 [air, unspecified]: 3.34781e-8 kg; = 3.7e-8/1.1052; lognormal variance with pedigree 0.0434, pedigree (2,2,3,3,2)
  (same comment as for Acenaphthene)
- Methane, fossil [air, unspecified]: 1.17626e-5 kg; = 1.3e-5/1.1052; lognormal variance with pedigree 0.0427, pedigree (2,2,3,1,1)
  (same comment as for Carbon dioxide, fossil)
- Methane, monochloro-, R-40 [air, unspecified]: 1.77343e-7 kg; = 1.96e-7/1.1052; lognormal variance with pedigree 0.0434, pedigree (2,2,3,3,2)
  (same comment as for Acenaphthene)
- Methane, non-fossil [air, unspecified]: 0.00110387 kg; = 1.22E-3/1.1052; lognormal variance with pedigree 0.0427, pedigree (2,2,3,1,1)
  (same comment as for Carbon dioxide, fossil)
- Methanol [air, unspecified]: 0.000716612 kg; = 7.92e-4/1.1052; lognormal variance with pedigree 0.0434, pedigree (2,2,3,3,2)
  (same comment as for Acenaphthene)
- Molybdenum VI [air, unspecified]: 6.89468e-7 kg; = 7.62e-7/1.1052; lognormal variance with pedigree 0.6534, pedigree (2,2,3,3,2)
  (same comment as for Acenaphthene)
- NMVOC, non-methane volatile organic compounds [air, unspecified]: 0.000194535 kg; = 2.15e-4/1.1052; lognormal variance with pedigree 0.0434, pedigree (2,2,3,3,2)
  (same comment as for Acenaphthene)
- Nickel II [air, unspecified]: 7.82664e-7 kg; = 8.65e-7/1.1052; lognormal variance with pedigree 0.6534, pedigree (2,2,3,3,2)
  (same comment as for Acenaphthene)
- Nitrogen oxides [air, unspecified]: 0.00141151 kg; = 1.56e-3/1.1052; lognormal variance with pedigree 0.0421, pedigree (1,2,3,1,1)
  Combustion and other process activities. Quantity reported by mills under study.
- PAH, polycyclic aromatic hydrocarbons [air, unspecified]: 1.88201e-5 kg; = 2.08e-5/1.1052; lognormal variance with pedigree 0.3034, pedigree (2,2,3,3,2)
  (same comment as for Acenaphthene)
- Particulate Matter, < 2.5 um [air, unspecified]: 0.000308541 kg; = 3.41e-4/1.1052; lognormal variance with pedigree 0.3034, pedigree (2,2,3,3,2)
  (same comment as for Acenaphthene)
- Particulate Matter, > 10 um [air, unspecified]: 0.000328447 kg; = (3.63e-4+1.33e-10)/1.1052; lognormal variance with pedigree 0.0434, pedigree (2,2,3,3,2)
  Combustion and process emission. Includes PM>10 and unspecified particulates. Modelled using a mix of NCASI, ecoinvent, and US EPA data.
- Particulate Matter, > 2.5 um and < 10um [air, unspecified]: 7.10279e-5 kg; = 7.85e-5/1.1052; lognormal variance with pedigree 0.1234, pedigree (2,2,3,3,2)
  (same comment as for Acenaphthene)
- Pentane [air, unspecified]: 4.64169e-6 kg; = 5.13e-6/1.1052; lognormal variance with pedigree 0.0434, pedigree (2,2,3,3,2)
  (same comment as for Acenaphthene)
- Phenol [air, unspecified]: 8.35143e-6 kg; = 9.23e-6/1.1052; lognormal variance with pedigree 0.0434, pedigree (2,2,3,3,2)
  (same comment as for Acenaphthene)
- Phenol, pentachloro- [air, unspecified]: 5.1122e-14 kg; = 5.65e-14/1.1052; lognormal variance with pedigree 0.0434, pedigree (2,2,3,3,2)
  (same comment as for Acenaphthene)
- Phosphorus [air, unspecified]: 7.36518e-7 kg; = 8.14e-7/1.1052; lognormal variance with pedigree 0.0434, pedigree (2,2,3,3,2)
  (same comment as for Acenaphthene)
- Polonium-210 [air, unspecified]: 0.000375075 kBq; = 0.414533/1000/1.1052; lognormal variance with pedigree 0.3034, pedigree (2,2,3,3,2)
  (same comment as for Acenaphthene)
- Potassium I [air, unspecified]: 5.55556e-6 kg; = 6.14e-6/1.1052; lognormal variance with pedigree 0.0434, pedigree (2,2,3,3,2)
  (same comment as for Acenaphthene)
- Potassium-40 [air, unspecified]: 5.95711e-5 kBq; = 0.065838/1000/1.1052; lognormal variance with pedigree 0.3034, pedigree (2,2,3,3,2)
  (same comment as for Acenaphthene)
- Propanal [air, unspecified]: 2.85921e-6 kg; = 3.16e-6/1.1052; lognormal variance with pedigree 0.0434, pedigree (2,2,3,3,2)
  (same comment as for Acenaphthene)
- Propane [air, unspecified]: 1.17626e-5 kg; = 1.30e-5/1.1052; lognormal variance with pedigree 0.0434, pedigree (2,2,3,3,2)
  (same comment as for Acenaphthene)
- Propene [air, unspecified]: 5.51936e-6 kg; = 6.1e-6/1.1052; lognormal variance with pedigree 0.0434, pedigree (2,2,3,3,2)
  (same comment as for Acenaphthene)
- Propionic acid [air, unspecified]: 7.66377e-8 kg; = 8.47e-8/1.1052; lognormal variance with pedigree 0.0434, pedigree (2,2,3,3,2)
  (same comment as for Acenaphthene)
- Radium-226 [air, unspecified]: 5.29515e-5 kBq; = 0.058522/1000/1.1052; lognormal variance with pedigree 0.3034, pedigree (2,2,3,3,2)
  (same comment as for Acenaphthene)
- Radium-228 [air, unspecified]: 0.000286817 kBq; = 0.31699/1000/1.1052; lognormal variance with pedigree 0.3034, pedigree (2,2,3,3,2)
  (same comment as for Acenaphthene)
- Radon-220 [air, unspecified]: 4.41278e-6 kBq; = 0.004877/1000/1.1052; lognormal variance with pedigree 0.3034, pedigree (2,2,3,3,2)
  (same comment as for Acenaphthene)
- Radon-222 [air, unspecified]: 4.41278e-6 kBq; = 0.004877/1000/1.1052; lognormal variance with pedigree 0.3034, pedigree (2,2,3,3,2)
  (same comment as for Acenaphthene)
- Scandium [air, unspecified]: 5.55556e-9 kg; = 6.14e-9/1.1052; lognormal variance with pedigree 0.6534, pedigree (2,2,3,3,2)
  (same comment as for Acenaphthene)
- Selenium IV [air, unspecified]: 5.6008e-7 kg; = 6.19e-7/1.1052; lognormal variance with pedigree 0.6534, pedigree (2,2,3,3,2)
  (same comment as for Acenaphthene)
- Silicon [air, unspecified]: 6.97611e-5 kg; = 7.71e-5/1.1052; lognormal variance with pedigree 0.0434, pedigree (2,2,3,3,2)
  (same comment as for Acenaphthene)
- Sodium [air, unspecified]: 2.85921e-6 kg; = 3.16e-6/1.1052; lognormal variance with pedigree 0.0434, pedigree (2,2,3,3,2)
  (same comment as for Acenaphthene)
- Strontium [air, unspecified]: 7.11183e-7 kg; = 7.86e-7/1.1052; lognormal variance with pedigree 0.6534, pedigree (2,2,3,3,2)
  (same comment as for Acenaphthene)
- Styrene [air, unspecified]: 4.5874e-6 kg; = 5.07e-6/1.1052; lognormal variance with pedigree 0.0434, pedigree (2,2,3,3,2)
  (same comment as for Acenaphthene)
- Sulfur oxides [air, unspecified]: 0.00104054 kg; = 1.15e-3/1.1052; lognormal variance with pedigree 0.0027, pedigree (1,2,3,1,1)
  Combustion and other process activities. Quantity reported by mills under study.
- Tetrachloroethylene [air, unspecified]: 1.71915e-6 kg; = 1.9e-6/1.1052; lognormal variance with pedigree 0.0434, pedigree (2,2,3,3,2)
  (same comment as for Acenaphthene)
- Thallium I [air, unspecified]: 8.78574e-9 kg; = 9.71e-9/1.1052; lognormal variance with pedigree 0.6534, pedigree (2,2,3,3,2)
  (same comment as for Acenaphthene)
- Thorium [air, unspecified]: 6.35179e-9 kg; = 7.02e-9/1.1052; lognormal variance with pedigree 0.6534, pedigree (2,2,3,3,2)
  (same comment as for Acenaphthene)
- Thorium-228 [air, unspecified]: 2.42698e-5 kBq; = 0.026823/1000/1.1052; lognormal variance with pedigree 0.3034, pedigree (2,2,3,3,2)
  (same comment as for Acenaphthene)
- Thorium-232 [air, unspecified]: 1.54443e-5 kBq; = 0.017069/1000/1.1052; lognormal variance with pedigree 0.3034, pedigree (2,2,3,3,2)
  (same comment as for Acenaphthene)
- Tin ion [air, unspecified]: 4.39739e-8 kg; = 4.86e-8/1.1052; lognormal variance with pedigree 0.6534, pedigree (2,2,3,3,2)
  (same comment as for Acenaphthene)
- Titanium ion [air, unspecified]: 1.81868e-6 kg; = 2.01e-6/1.1052; lognormal variance with pedigree 0.6534, pedigree (2,2,3,3,2)
  (same comment as for Acenaphthene)
- Toluene [air, unspecified]: 2.60586e-5 kg; = 2.88e-5/1.1052; lognormal variance with pedigree 0.0434, pedigree (2,2,3,3,2)
  (same comment as for Acenaphthene)
- Uranium [air, unspecified]: 7.94426e-9 kg; = 8.78e-9/1.1052; lognormal variance with pedigree 0.6534, pedigree (2,2,3,3,2)
  (same comment as for Acenaphthene)
- Uranium-238 [air, unspecified]: 4.41269e-5 kBq; = 0.048769/1000/1.1052; lognormal variance with pedigree 0.3034, pedigree (2,2,3,3,2)
  (same comment as for Acenaphthene)
- Vanadium V [air, unspecified]: 3.91784e-7 kg; = 4.33e-7/1.1052; lognormal variance with pedigree 0.6534, pedigree (2,2,3,3,2)
  (same comment as for Acenaphthene)
- Water [air, unspecified]: 0.00299699 m3; = 3.312272/1000/1.1052; lognormal variance with pedigree 0.0033, pedigree (2,2,3,1,1)
  Estimated using NCASI methods.
- Xylene [air, unspecified]: 2.56967e-6 kg; = 2.84e-6/1.1052; lognormal variance with pedigree 0.0434, pedigree (2,2,3,3,2)
  (same comment as for Acenaphthene)
- Zinc II [air, unspecified]: 1.72819e-6 kg; = 1.91e-6/1.1052; lognormal variance with pedigree 0.6534, pedigree (2,2,3,3,2)
  (same comment as for Acenaphthene)
- AOX, Adsorbable Organic Halogen [water, unspecified]: 5.59175e-6 kg; = 6.18e-6/1.1052; lognormal variance with pedigree 0.3021, pedigree (1,2,3,1,1)
  Reported by mills under study.
- Arsenic ion [water, unspecified]: 5.10315e-8 kg; = 5.64e-8/1.1052; lognormal variance with pedigree 0.661225, pedigree (2,5,3,2,2)
  Modelled using NCASI proprietary database. Emission factors are updated periodically.
- BOD5, Biological Oxygen Demand [water, unspecified]: 0.0008831 kg; = bod5_emissions; lognormal variance with pedigree 0.0421, pedigree (1,2,3,1,1)
  Reported by mills under study.
- Barium II [water, unspecified]: 9.86247e-7 kg; = 1.09e-6/1.1052; lognormal variance with pedigree 0.661225, pedigree (2,5,3,2,2)
  Modelled using NCASI proprietary database. Emission factors are updated periodically.
- COD, Chemical Oxygen Demand [water, unspecified]: 0.0044155 kg; = bod5_emissions/0.2; lognormal variance with pedigree 0.25, pedigree (5,5,5,5,5)
  Calculated based on ecoinvent DGQ
- Chloride [water, unspecified]: 2.45204e-11 kg; = 2.71e-11/1.1052; lognormal variance with pedigree 0.042025, pedigree (2,3,2,2,2)
  Modelled using NCASI proprietary database. Emission factors are updated periodically.
- Chromium III [water, unspecified]: 5.99891e-8 kg; = 6.63e-8/1.1052; lognormal variance with pedigree 0.661225, pedigree (2,5,3,2,2)
  Modelled using NCASI proprietary database. Emission factors are updated periodically.
- Copper ion [water, unspecified]: 6.68657e-8 kg; = 7.39e-8/1.1052; lognormal variance with pedigree 0.661225, pedigree (2,5,3,2,2)
  Modelled using NCASI proprietary database. Emission factors are updated periodically.
- DOC, Dissolved Organic Carbon [water, unspecified]: 0.00163537 kg; = bod5_emissions/0.2/2.7; lognormal variance with pedigree 0.25, pedigree (5,5,5,5,5)
  Calculated based on ecoinvent DGQ
- Iron ion [water, unspecified]: 1.2215e-10 kg; = 1.35e-10/1.1052; lognormal variance with pedigree 0.661225, pedigree (2,5,3,2,2)
  Modelled using NCASI proprietary database. Emission factors are updated periodically.
- Lead II [water, unspecified]: 9.2291e-8 kg; = 1.02e-7/1.1052; lognormal variance with pedigree 0.661225, pedigree (2,5,3,2,2)
  Modelled using NCASI proprietary database. Emission factors are updated periodically.
- Manganese II [water, unspecified]: 7.00326e-6 kg; = 7.74e-6/1.1052; lognormal variance with pedigree 0.661225, pedigree (2,5,3,2,2)
  Modelled using NCASI proprietary database. Emission factors are updated periodically.
- Mercury II [water, unspecified]: 4.19834e-11 kg; = 4.64e-11/1.1052; lognormal variance with pedigree 0.661225, pedigree (2,5,3,2,2)
  Modelled using NCASI proprietary database. Emission factors are updated periodically.
- Nickel II [water, unspecified]: 5.3384e-8 kg; = 5.9e-8/1.1052; lognormal variance with pedigree 0.661225, pedigree (2,5,3,2,2)
  Modelled using NCASI proprietary database. Emission factors are updated periodically.
- Nitrogen [water, unspecified]: 0.000188201 kg; = 0.000208/1.1052; lognormal variance with pedigree 0.096625, pedigree (2,5,5,2,3)
  Modelled
- Phosphorus [water, unspecified]: 3.23018e-5 kg; = 3.57e-5/1.1052; lognormal variance with pedigree 0.096625, pedigree (2,5,5,2,3)
  Modelled
- Suspended solids, unspecified [water, unspecified]: 0.00121697 kg; = 0.001345/1.1052; lognormal variance with pedigree 0.0421, pedigree (1,2,3,1,1)
  Reported by mills under study.
- TOC, Total Organic Carbon [water, unspecified]: 0.00163537 kg; = bod5_emissions/0.2/2.7; lognormal variance with pedigree 0.25, pedigree (5,5,5,5,5)
  Calculated based on ecoinvent DGQ
- Vanadium V [water, unspecified]: 1.11292e-7 kg; = 1.23e-7/1.1052; lognormal variance with pedigree 0.661225, pedigree (2,5,3,2,2)
  Modelled using NCASI proprietary database. Emission factors are updated periodically.
- Water [water, surface water]: 0.0260966 m3; = (1.852+26.99)/1000/1.1052; lognormal variance with pedigree 0.0033, pedigree (2,2,3,1,1)
  Cooling water and process effluent. Process effluent is reported, cooling water is estimated using mass balances.
- Zinc II [water, unspecified]: 9.41006e-7 kg; = 1.04e-6/1.1052; lognormal variance with pedigree 0.661225, pedigree (2,5,3,2,2)
  Modelled using NCASI proprietary database. Emission factors are updated periodically.

## Sampling procedure
Data were collected from the producers by NCASI. 42 mills supplied data. Data represent a production-weighted average. Data represents 70% of a total production of 35377100 oven-dried short ton (odst) (AF&PA statistics)

## Extrapolations
Containerboard facilities provided air emission data for NOx, SOX and TRS. The remaining emissions were estimated as follows. GHG releases were calculated using US fuel specific emission factors (from NCASI or US EPA). Other combustion emissions from wood and black liquor, as well as other process-related emissions were estimated using NCASI proprietary database of emission factors. Emissions from WWTP residuals combustion were estimated with that of wood (using NCASI data). Combustion emissions for tire-derived fuel were estimated from EPA. Other combustion emissions from other fuels where estimated using ecoinvent. More specifically the following datasets were used. Bituminous coal: Heat, central or small-scale, other than natural gas {RoW}| heat production, hard coal briquette, stove 5-15kW. Distillate fuel oil, gasoline and diesel: Heat, district or industrial, other than natural gas {CA-QC}| heat production, light fuel oil, at industrial furnace 1MW. Residual fuel oil: Heat, district or industrial, other than natural gas {CA-QC}| heat production, heavy fuel oil, at industrial furnace 1MW. Natural gas and LPG: Heat, district or industrial, natural gas {CA-QC}| heat production, natural gas, at industrial furnace >100kW. Non recyclable paper (fuel produced internally): Waste paperboard {RoW}| treatment of, municipal incineration. Note that, in addition to fuels listed as input, containerboard facilities also burn fuels produced internally for which emissions have been included. These fuels include: bark and other woody residues (mainly from pulpwood), black liquor (by-product of pulping), WWTP residuals, non-recyclable paper. Although supplied from outside the system boundaries, hence not an internal fuel, a minor amount of rubber tyre chips (0.0035288kg/kg of reference product) is not listed as input from technosphere, due to ecoinvent modelling reasons. The emissions from the rubber's combustion are included in the calculated process emissions.
