# esterification of palm oil

Dataset: EcoSpold 2, unit process
Geography: RoW
Time period: 1996-01-01 to 2022-12-31
Technology level: current
Classification: ISIC rev.4 ecoinvent: 1920:Manufacture of refined petroleum products
Classification: EcoSpold01Categories: biomass/fuels
Tags: ConvertedDataset
Scenario: Business-as-Usual
System model: Substitution, consequential, long-term
Share of production covered: 0 %
Generated by: Edgard Gnansounou
Published in: Jungbluth N. 2007
Database: ecoinvent
isCopyrightProtected: true

## General comment
Inventory refers to the production of 1 kg palm methyl ester (PME), respectively glycerine, from palm oil. The multioutput-process 'palm oil, in esterification plant' delivers the co-products 'palm methyl ester, at esterification plant' and 'glycerine, from palm oil, at esterification plant'. Economic allocation with allocation factor of 87.1% to rape oil and 12.9% to glycerine. Allocation of CO2 emissions is done according to carbon balance.
[This dataset was already contained in the ecoinvent database version 2. It was not individually updated during the transfer to ecoinvent version 3. Life Cycle Impact Assessment results may still have changed, as they are affected by changes in the supply chain, i.e. in other datasets. This dataset was generated following the ecoinvent quality guidelines for version 2. It may have been subject to central changes described in the ecoinvent version 3 change report (http://www.ecoinvent.org/database/ecoinvent-version-3/reports-of-changes/), and the results of the central updates were reviewed extensively. The changes added e.g. consistent water flows and other information throughout the database. The documentation of this dataset can be found in the ecoinvent reports of version 2, which are still available via the ecoinvent website. The change report linked above covers all central changes that were made during the conversion process.]

## Included activities end
This process includes the esterification process of palm oil to methyl ester and glycerine, intermediate storage of the oil and products, treatment of specific wastewater effluents. System boundary is at the esterification plant.

## Geography
Data from different plants worldwide (incl. literature data)

## Technology
Typical vegetable oil esterification plant designed for the production of methyl ester (for use in the vehicle fuels market), global context. Base-catalyzed transesterification.

## Time period
Data from 1996 to 2003, current technology for large scale biodiesel plants worldwide

## Parameters
- fraction, cooling water, cooling pond system, to air: 0.032 dimensionless; name fraction_CW_CP_to_air; lognormal variance with pedigree 0.0413, pedigree (2,3,1,3,1)
  Calculated based on literature value (Scown, C.D., 2011, Water Footprint of U.S. Transportation Fuels and supplying information of the article) (Vionnet, S., Quantis Water Database - Technical Report, 2012).
- fraction, cooling water, once-through system, to air: 0.004 dimensionless; name fraction_CW_OT_to_air; lognormal variance with pedigree 0.0413, pedigree (2,3,1,3,1)
  (same comment as for fraction, cooling water, cooling pond system, to air)
- fraction, cooling water, recirculating system, to air: 0.771 dimensionless; name fraction_CW_R_to_air; lognormal variance with pedigree 0.0413, pedigree (2,3,1,3,1)
  (same comment as for fraction, cooling water, cooling pond system, to air)
- fraction, cooling water, to air: 0.3875 dimensionless; name fraction_CW_to_air; = (0.5*fraction_CW_OT_to_air)+(0.5*fraction_CW_R_to_air); lognormal variance with pedigree 0.092025, pedigree (4,4,3,2,4)
  Calculated value based on literature value (see comments of the other parametres present in this dataset) and expert opinion. In the case when no industry/literature data are available about the type of cooling or directly fraction, cooling water, to air specific for the process a default assumption is applied. It is assumed that the once-through cooling system is used in 50% of all cases and recirculating system is used in another 50% of all cases.
- fraction, process water, to air: 0.205 dimensionless; lognormal variance with pedigree 0.092025, pedigree (4,4,3,2,4)
- fraction, tap water, to air: 0.205 dimensionless; name fraction_TW_to_air; = fraction_PW_to_air; lognormal variance with pedigree 0.092025, pedigree (4,4,3,2,4)
  Calculated value. See comment in the other parametres present in this dataset. Tap water is considered to be always used as process water, thus process water fractions to air are applied to all tap water input flows to calculate the amount of water consumed in the processes.

## Reference product
- fatty acid methyl ester: 1 kg; name RP_amount_1; By-product classification allocatable product; CPC 35491: Biodiesel
  production volume 7e7 kg
    Estimated as all production outside Europe, USA, Australia and Brazil. Source: F. O. Licht World Ethanol and Biofuels Report, vol. 4, no. 17 (9 May 2006), p. 395.
  property heating value, net 37.2 MJ
    Based on literature, report 17, page 439. Jungbluth, N., Chudacoff, M., Dauriat, A., Dinkel, F., Doka, G., Faist Emmenegger, M., Gnansounou, E., Kljun, N., Schleiss, K., Spielmann, M., Stettler, C., Sutter, J. 2007: Life Cycle Inventories of Bioenergy. ecoinvent report No. 17, Swiss Centre for Life Cycle Inventories, Dübendorf, CH.
  property price 0.817 EUR2005
    Temporary price data. Calculated as 90% of purchasers price based on: 2004 import and export prices (total trades (USD) divided by total weight (kg) in EU27, USA, China, Japan and India) from UN Commodity Trade Statistics Database (http://data.un.org/Explorer.aspxDatabase [Accessed 2 July 2010]). Commodity: 'Veg fats, oils or fractions hydrogenated, esterified'.
  properties: EcoSpold01Allocation_undefined_1 100, EcoSpold01Allocation_undefined_10 87.07, EcoSpold01Allocation_undefined_11 87.07, EcoSpold01Allocation_undefined_12 87.07, EcoSpold01Allocation_undefined_13 87.07, EcoSpold01Allocation_undefined_14 87.07, EcoSpold01Allocation_undefined_15 27.05, EcoSpold01Allocation_undefined_2 100, EcoSpold01Allocation_undefined_3 87.07, EcoSpold01Allocation_undefined_4 87.07, EcoSpold01Allocation_undefined_5 87.07, EcoSpold01Allocation_undefined_6 87.07, EcoSpold01Allocation_undefined_7 87.07, EcoSpold01Allocation_undefined_8 87.07, EcoSpold01Allocation_undefined_9 87.07, carbon allocation 0.76 kg, carbon content 0.76, carbon content, fossil 0.045, carbon content, non-fossil 0.715, dry mass 1 kg, water content 0, water in wet mass 0 kg, wet mass 1 kg

## Inputs from technosphere
- electricity, medium voltage: 0.00365316, 0.000539477, 4.31191e-5, 0.000781995, 1.08633e-5, 1.23979e-5, 8.86505e-5, 0.00045041, 2.06303e-5, 4.53812e-5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 kWh (46 suppliers, which the file names only by identifier); sum of these 0.0422957 kWh; lognormal variance with pedigree 0.042, pedigree (1,1,5,5,1)
  Literature data & biodiesel producer
  EcoSpold01Location=NL
  Uncertainty: Literature data & biodiesel producer
- glycerine: -0.0727185, -0.0363593 kg (2 suppliers, which the file names only by identifier); sum of these -0.109078 kg
  EcoSpold01Location=MY
  production volume
    Production of palm methyl ester was marginal in 2005 in MY
    Calculated from the production volume of palm methyl ester in proportion to the respective output amounts.
  properties: EcoSpold01Allocation_undefined_10 12.93, EcoSpold01Allocation_undefined_11 12.93, EcoSpold01Allocation_undefined_12 12.93, EcoSpold01Allocation_undefined_13 12.93, EcoSpold01Allocation_undefined_14 12.93, EcoSpold01Allocation_undefined_15 72.95, EcoSpold01Allocation_undefined_16 100, EcoSpold01Allocation_undefined_3 12.93, EcoSpold01Allocation_undefined_4 12.93, EcoSpold01Allocation_undefined_5 12.93, EcoSpold01Allocation_undefined_6 12.93, heating value, net 18 MJ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
  note on heating value, net: Based on literature, Report 17: Jungbluth, N., Chudacoff, M., Dauriat, A., Dinkel, F., Doka, G., Faist Emmenegger, M., Gnansounou, E., Kljun, N., Schleiss, K., Spielmann, M., Stettler, C., Sutter, J. 2007: Life Cycle Inventories of Bioenergy. ecoinvent report No. 17, Swiss Centre for Life Cycle Inventories, Dübendorf, CH.
- heat, district or industrial, natural gas: 0.923779 MJ; lognormal variance with pedigree 0.042, pedigree (1,1,5,5,1)
  EcoSpold01Location=RER
  Literature data & biodiesel producer
  Uncertainty: Literature data & biodiesel producer
  properties: heating value, net 1 MJ
- methanol: 0.113601 kg; lognormal variance with pedigree 0.042, pedigree (1,1,5,5,1)
  EcoSpold01Location=GLO
  Literature data & biodiesel producer
  Uncertainty: Literature data & biodiesel producer
  properties: carbon content, fossil 0.375, dry mass 1 kg, heating value, net 20 MJ, wet mass 1 kg
  note on heating value, net: Based on literature, page 533, Report 17: Jungbluth, N., Chudacoff, M., Dauriat, A., Dinkel, F., Doka, G., Faist Emmenegger, M., Gnansounou, E., Kljun, N., Schleiss, K., Spielmann, M., Stettler, C., Sutter, J. 2007: Life Cycle Inventories of Bioenergy. ecoinvent report No. 17, Swiss Centre for Life Cycle Inventories, Dübendorf, CH.
- palm oil, crude: 1.02807 kg; lognormal variance with pedigree 0.0521, pedigree (1,2,5,5,1)
  Literature data & biodiesel producer
  EcoSpold01Location=MY
  Uncertainty: Literature data & biodiesel producer
  properties: carbon content, non-fossil 0.752881, dry mass 1 kg, heating value, net 37 MJ, wet mass 1 kg
  note on carbon content, non-fossil: In Tab 17.4, ecoinvent v2.2 report n 17 C49H97O6. Palm oil (tab 17.4, ecoinvent v2.2 report 17-part 17)
  note on heating value, net: Literature value, Source: Biograce, Condensed list of standard values, version 2 - Public. Available at: https://biograce.net/app/webroot/files/file/BioGrace_condensed_list_of_standard_values_-_version_2_-_Public.doc
- phosphoric acid, industrial grade, without water, in 85% solution state: 0.00460245 kg; lognormal variance with pedigree 0.0427, pedigree (2,2,5,5,1)
  Literature data & biodiesel producer
  EcoSpold01Location=RER
  Uncertainty: Literature data & biodiesel producer
  properties: dry mass 1 kg, wet mass 1 kg
- potassium hydroxide: 0.011356 kg; lognormal variance with pedigree 0.0427, pedigree (2,2,5,5,1)
  (same comment as for phosphoric acid, industrial grade, without water, in 85% solution stat)
  properties: dry mass 0.856 kg, water content 0.168224, wet mass 1 kg
- tap water: 0.0167155 kg; name tap_water_input; source Sheenhan, J. 1998; lognormal variance with pedigree 0.0546, pedigree (3,3,5,5,1)
  Literature, environmental report
  Calculated based on literature (Sheenhan, J., 18, An Overview of Biodiesel and Petroleum Diesel Life Cycles; Omni Tech International, 2010, Life Cycle Impact of Soybean Production and Soy Industrial Products), (Vionnet, S., Quantis Water Database - Technical Report, 2012). Assumed to have the same water use as "soybean methyl ester, at esterification plant". The process starts when refined oil enters the plant. It includes the processes: prepurification, deacidification, transesterification, destilation, etc. It is assumed that 95% of water use is allocated to cooling water and 5% of water is allocated as process water.
  EcoSpold01Location=RER
  Uncertainty: Literature, environmental report
  properties: carbon content, fossil 0.00178991, dry mass 0.000337476 kg, water content 2962.17, wet mass 1 kg
  note on carbon content, fossil: In Tab 17.4, ecoinvent v2.2 report n 17 Bicarbonate content is 2.93 mol/m3. CO2 content is 0.1 mol/m3 (ecoinvent v2.2 report 8, Tab 93.1).
- vegetable oil esterification facility: 9.34605e-10 unit; lognormal variance with pedigree 0.354, pedigree (1,4,5,5,1)
  EcoSpold01Location=CH
  Calculation, according to feed capacity and lifetime of the plant
  Uncertainty: Calculation, according to feed capacity and lifetime of the plant
- wastewater, average: -1.19745e-5, -1.78294e-7, -5.00773e-5, -3.00937e-7 m3 (4 suppliers, which the file names only by identifier); sum of these -6.25311e-5 m3; lognormal variance with pedigree 0.09, pedigree (5,5,1,5,1)
  Calculation, to close mass balance of process
  EcoSpold01Location=CH
  Uncertainty: Calculation, to close mass balance of process
  production volume
    Calculated from the production volume of palm methyl ester in proportion to the respective output amounts.
  properties: carbon content, non-fossil 0.194039, dry mass 0.346837 kg, mass concentration, TOC 0.1091 kg/m3, mass concentration, calcium 0.039453 kg/m3, mass concentration, chlorine 0.030031 kg/m3, mass concentration, hydrogen 0.013365 kg/m3, mass concentration, nitrogen 0.031015 kg/m3, mass concentration, oxygen 0.069824 kg/m3, mass concentration, sodium 0.06456 kg/m3, mass concentration, sulfur 0.015602 kg/m3, water content 2882.2, wet mass 1000 kg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
  note on carbon content, non-fossil: 0.0673 kg TOC/m3 (Tab A.17, ecoinvent v2.2 report 13_I). TOC was considered as Total Carbon.

## Inputs from nature
- Carbon dioxide, in air [natural resource, in air]: 0.221548 kg; lognormal variance with pedigree 0.042, pedigree (1,1,5,5,1)
  Calculation, to close carbon balance
  Uncertainty: Calculation, to close carbon balance
- Water, cooling, unspecified natural origin [natural resource, in water]: 0.000317595 m3; name water_cooling_UNO_input; source Sheenhan, J. 1998; lognormal variance with pedigree 0.0612, pedigree (2,3,5,5,3)
  Calculated based on literature (Sheenhan, J., 18, An Overview of Biodiesel and Petroleum Diesel Life Cycles; Omni Tech International, 2010, Life Cycle Impact of Soybean Production and Soy Industrial Products), (Vionnet, S., Quantis Water Database - Technical Report, 2012). Assumed to have the same water use as "soybean methyl ester, at esterification plant". The process starts when refined oil enters the plant. It includes the processes: prepurification, deacidification, transesterification, destilation, etc. The process ends when methyl ester leaves the plant. It is assumed that 95% of water use is allocated to cooling water and 5% of water is allocated as process water.
  property carbon content, fossil 0.0104329; name C_content_fossil
  property carbon content, non-fossil 0; name C_content_non_fossil
  property dry mass 0.1101 kg; name DM
  property water content 9081.65; name water_content
  property water in wet mass 999.89 kg; name WWM

## Emissions to nature
- Carbon dioxide, non-fossil [air, urban air close to ground]: 0.303701 kg; lognormal variance with pedigree 0.042, pedigree (1,1,5,5,1)
  Calculation, to close carbon balance
  Uncertainty: Calculation, to close carbon balance
- Water [air, unspecified]: 0.000123068 m3; name water_to_air_unspecified; lognormal variance with pedigree 0.0827, pedigree (2,2,5,5,1)
  Calculated value based on literature values and expert opinion. See comments in the parametres' comment field.
  property fraction, origin: fresh water 0.0270895; name fraction_origin_fresh_water
  property fraction, origin: salt water 0; name fraction_origin_salt_water
  property fraction, origin: unspecified 0.97291; name fraction_origin_unspecified
- Water [water, unspecified]: 0.000145285 m3; name water_to_water_unspecified; = (tap_water_input/1000)*(1-fraction_TW_to_air)+water_cooling_UNO_input*(1-fraction_CW_to_air)-0.0000625310990027758; lognormal variance with pedigree 0.0827, pedigree (2,2,5,5,1)
  (same comment as for Water)
  property fraction, origin: fresh water 0.0639453; name fraction_origin_fresh_water_Ww
  property fraction, origin: salt water 0; name fraction_origin_salt_water_Ww
  property fraction, origin: unspecified 0.936055; name fraction_origin_unspecified_Ww

## Sampling procedure
Cross-checking of various literature sources from 1998 to 2006

## Extrapolations
The dataset "electricity, medium voltage, production NL" is used as a proxy for electricity supply in MY, because it is the mix, closest to the electricity mix in MY. This dataset has been copied from an original dataset covering the geography MY. The uncertainty has been adjusted accordingly.

## Review by Niels Jungbluth 2006-08-15
Passed.
none

## Review by Emilia Moreno Ruiz 2012-03-16
name change from "palm methyl ester" to "vegetable oil methyl ester"
