# ethanol production from sweet sorghum

Dataset: EcoSpold 2, unit process
Geography: RoW
Time period: 1992-01-01 to 2022-12-31
Technology level: current
Classification: EcoSpold01Categories: biomass/fuels
Classification: ISIC rev.4 ecoinvent: 2011:Manufacture of basic chemicals
Tags: ConvertedDataset
Scenario: Business-as-Usual
System model: Substitution, consequential, long-term
Share of production covered: 0 %
Generated by: Edgard Gnansounou
Published in: Jungbluth N. 2007
Database: ecoinvent
isCopyrightProtected: true

## General comment
Inventory refers to the production of 1 kg of hydrated ethanol 95% (dry basis, i.e. 1.05 kg hydrated ethanol 95% wet basis), respectively 1 kg of excess bagasse (70% dry matter), 1 kWh of electricity and 1 kg of vinasse. The multioutput-process 'sweet sorghum, in ethanol distillery' delivers the co-products 'ethanol, 95% in H2O, from sweet sorghum, at distillery', 'bagasse, from sweet sorghum, at distillery', 'electricity, bagasse, sorghum, at distillery' and 'vinasse, from sweet sorghum, at distillery'. Economic allocation with allocation factor for common stages of 91% to ethanol. Allocation according to carbon balance for CO2.
[This dataset was already contained in the ecoinvent database version 2. It was not individually updated during the transfer to ecoinvent version 3. Life Cycle Impact Assessment results may still have changed, as they are affected by changes in the supply chain, i.e. in other datasets. This dataset was generated following the ecoinvent quality guidelines for version 2. It may have been subject to central changes described in the ecoinvent version 3 change report (http://www.ecoinvent.org/database/ecoinvent-version-3/reports-of-changes/), and the results of the central updates were reviewed extensively. The changes added e.g. consistent water flows and other information throughout the database. The documentation of this dataset can be found in the ecoinvent reports of version 2, which are still available via the ecoinvent website. The change report linked above covers all central changes that were made during the conversion process.]

## Included activities end
This dataset includes the transport of sorghum to the distillery and the processing of sorghum to ethanol (95% w/w), bagasse (70% dry matter, excess), excess electricity and vinasse from ethanol production. System boundary is at the ethanol distillery. Treatment of waste effluents is not included (most wastewater is spread over the fields nearby).

## Geography
Data is from the etha+ project (Alcosuisse, CH) and the ASIATIC project (LASEN, CH), adapted to CN context

## Technology
Juice extraction is performed through milling (not diffusion). The juice is then converted to ethanol by standard fermentation and distillation techniques. Energy supply is done by combustion of the bagasse resulting from the extraction stage. The main product is ethanol.

## Time period
Data from 1992 to 2005, current technology

## Parameters
- fraction, cooling water, cooling pond system, to air: 0.032 dimensionless; lognormal variance with pedigree 0.0413, pedigree (2,3,1,3,1)
- fraction, cooling water, once-through system, to air: 0.004 dimensionless; lognormal variance with pedigree 0.0413, pedigree (2,3,1,3,1)
- fraction, cooling water, recirculating system, to air: 0.771 dimensionless; lognormal variance with pedigree 0.0413, pedigree (2,3,1,3,1)
- fraction, cooling water, to air: 0.64 dimensionless; lognormal variance with pedigree 0.092025, pedigree (4,4,3,2,4)
- fraction, process water, to air: 0 dimensionless
- fraction, tap water, to air: 0 dimensionless
- fraction, water, decarbonised, to air: 0.64 dimensionless; lognormal variance with pedigree 0.092025, pedigree (4,4,3,2,4)

## Reference product
- ethanol, without water, in 95% solution state, from fermentation: 1 kg; name RP_amount_1; By-product classification allocatable product; CPC 35491: Biodiesel; CAS 64-17-5
  EcoSpold01Location=CN
  production volume 3.37007e7 kg
    Calculated based on literature values and estimates. The global production volume of ethanol (from renewable sources =bioethanol) is 4.5E10l/year (*0.79kg/l= 3.55E+10kg/year) (Source: F. O. Licht, "Ethanol: World Production, by Country," table, World Ethanol and Biofuels Report, vol. 4, no. 17 (9 May 2006), p. 395.). Bioethanol is produced mainly from sugar cane and different type of grains (FAO, http://www.fao.org/docrep/016/i3009e/i3009e02.pdf). Sweet sorghum, grass, potatoes and rye represent minority feedstock. Therefore it is estimated, that each represent 0.1% of the total production volume.
  property heating value, net 28.1 MJ
    Based on literature, page 275, Report 17: Jungbluth, N., Chudacoff, M., Dauriat, A., Dinkel, F., Doka, G., Faist Emmenegger, M., Gnansounou, E., Kljun, N., Schleiss, K., Spielmann, M., Stettler, C., Sutter, J. 2007: Life Cycle Inventories of Bioenergy. ecoinvent report No. 17, Swiss Centre for Life Cycle Inventories, Dübendorf, CH.
  property price 0.324 EUR2005
    Temporary price data. Calculated as 90% of purchasers price based on: 2005 prices from FAPRI2007, 2009. Agricultural outlook. (http://www.fapri.missouri.edu/outreach/publications/ag_outlook.asp?current_page=outreach; accessed 22/06/10). Unit conversion from US gallon to kg - 1 gallon = 3.7856 liter * 0.789 kg/liter (ethanol density) = 2.9868 kg
  properties: carbon allocation 0.521739 kg, carbon content 0.521739, carbon content, fossil 0, carbon content, non-fossil 0.521739, dry mass 1 kg, water content 0, water in wet mass 0 kg, wet mass 1 kg

## Inputs from technosphere
- ammonia, anhydrous, liquid: 6.81382e-9, 1.38633e-9, 1.3227e-8, 6.19742e-9, 2.9273e-8, 4.104e-9, 1.46613e-7, 1.35006e-8 kg (8 suppliers, which the file names only by identifier); sum of these 2.21115e-7 kg; lognormal variance with pedigree 0.072, pedigree (4,4,5,5,1)
  Adapted from the dataset 'wood chips, in cogen 6400kWth, wood', according to actual water, carbon and energy content of the fuel (pressed sorghum bagasse)
  EcoSpold01Location=RER
  Uncertainty: Adapted from the dataset 'wood chips, in cogen 6400kWth, wood', according to actual water, carbon and energy content of the fuel (pressed sorghum bagasse)
  properties: dry mass 1 kg, wet mass 1 kg
- ammonium sulfate: 0.00314183, 0.00189021 kg (2 suppliers, which the file names only by identifier); sum of these 0.00503204 kg; lognormal variance with pedigree 0.0726, pedigree (2,4,5,5,3)
  Etha+ project Alcosuisse, industrial data
  EcoSpold01Location=RER
  Uncertainty: etha+ project Alcosuisse, industrial data
  properties: dry mass 1 kg, wet mass 1 kg
- bagasse, from sweet sorghum: -0.445993 kg; name BP_amount_6
  EcoSpold01Location=CN
  production volume
    Production volume of ethanol for use as a fuel was 1'500 Ml in 2004 in CN
    Calculated from the production volume of ethanol, without water, in 95% solution state, from fermentation in proportion to the respective output amounts.
  properties: carbon content, non-fossil 0.443, dry mass 0.702 kg, heating value, net 13.8 MJ, price 0.01 EUR2005, water content 0.424501, wet mass 1 kg
  note on carbon content, non-fossil: C content (dry matter basis) is 44.3% (Tab 16.31, ecoinvent v2.2 report 17)
- chemical, organic: 0.000154775 kg; lognormal variance with pedigree 0.072, pedigree (4,4,5,5,1)
  Adapted from the dataset 'wood chips, in cogen 6400kWth, wood', according to actual water, carbon and energy content of the fuel (pressed sorghum bagasse)
  EcoSpold01Location=GLO
  Uncertainty: Adapted from the dataset 'wood chips, in cogen 6400kWth, wood', according to actual water, carbon and energy content of the fuel (pressed sorghum bagasse)
  properties: carbon content, fossil 0.628, dry mass 1 kg, heating value, net 19.03 MJ, wet mass 1 kg
  note on carbon content, fossil: This dataset is an unweighted average of 20 organic substances (listed in Tab 88.1, ecoinvent v2.2 report 8, part II), being part of the top100 chemicals included in this database. The C-content has also been calculated as an unweighted average of the C content of the substances composing this dataset.
- chlorine, liquid: 1.4869e-6, 7.35736e-6 kg (2 suppliers, which the file names only by identifier); sum of these 8.84426e-6 kg; lognormal variance with pedigree 0.072, pedigree (4,4,5,5,1)
  EcoSpold01Location=RER
  Adapted from the dataset 'wood chips, in cogen 6400kWth, wood', according to actual water, carbon and energy content of the fuel (pressed sorghum bagasse)
  Uncertainty: Adapted from the dataset 'wood chips, in cogen 6400kWth, wood', according to actual water, carbon and energy content of the fuel (pressed sorghum bagasse)
  properties: dry mass 1 kg, wet mass 1 kg
- electricity, high voltage: -0.0136168, -0.000928271, -0.000400972, -0.0197382, -0.00835007, -0.00140333, -0.000523942, -0.0229569, -0.00392369, -0.00343058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 kWh (46 suppliers, which the file names only by identifier); sum of these -0.74473 kWh
  EcoSpold01Location=CN
  production volume
    Dummy value. Sweet sorghum is probably not commercially used for ethanol production today, but is rather regarded as promising feedstock for biofuels.
  properties: price 0.0977 EUR2005
- ethanol fermentation plant: 5.00524e-10 unit; lognormal variance with pedigree 0.3546, pedigree (2,4,5,5,1)
  Calculation, according to feed capacity and lifetime of the plant
  EcoSpold01Location=CH
  Uncertainty: Calculation, according to feed capacity and lifetime of the plant
- heat and power co-generation unit, 6400kW thermal, building: 6.49841e-9 unit; lognormal variance with pedigree 0.372, pedigree (4,4,5,5,1)
  Adapted from the dataset 'wood chips, in cogen 6400kWth, wood', according to actual water, carbon and energy content of the fuel (pressed sorghum bagasse)
  EcoSpold01Location=CH
  Uncertainty: Adapted from the dataset 'wood chips, in cogen 6400kWth, wood', according to actual water, carbon and energy content of the fuel (pressed sorghum bagasse)
- heat and power co-generation unit, 6400kW thermal, common components for heat+electricity: 2.60201e-8 unit; lognormal variance with pedigree 0.372, pedigree (4,4,5,5,1)
  (same comment as for heat and power co-generation unit, 6400kW thermal, building)
- heat and power co-generation unit, 6400kW thermal, components for electricity only: 2.60201e-8 unit; lognormal variance with pedigree 0.372, pedigree (4,4,5,5,1)
  EcoSpold01Location=CH
  Adapted from the dataset 'wood chips, in cogen 6400kWth, wood', according to actual water, carbon and energy content of the fuel (pressed sorghum bagasse)
  Uncertainty: Adapted from the dataset 'wood chips, in cogen 6400kWth, wood', according to actual water, carbon and energy content of the fuel (pressed sorghum bagasse)
- inorganic nitrogen fertiliser, as N: 8.24364e-6, 0.000147578, 0.000111077, 8.51007e-5, 1.37677e-6, 0.00054807, 5.1204e-6, 3.01318e-5, 7.13457e-6, 1.99717e-5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 kg (29 suppliers, which the file names only by identifier); sum of these 0.00754815 kg; lognormal variance with pedigree 0.0726, pedigree (2,4,5,5,3)
  (same comment as for ammonium sulfate)
  properties: dry mass 1 kg, wet mass 1 kg
- lubricating oil: 5.53583e-5, 0.000262793 kg (2 suppliers, which the file names only by identifier); sum of these 0.000318151 kg; lognormal variance with pedigree 0.0726, pedigree (2,4,5,5,3)
  EcoSpold01Location=RER
  Compilation of data from sugarcane and sorghum milling, industrial data
  Uncertainty: Compilation of data from sugarcane and sorghum milling, industrial data
  properties: carbon content, fossil 0.75, dry mass 1 kg, heating value, net 40.2 MJ, wet mass 1 kg
  note on carbon content, fossil: Lubricating oil is produced from diesel. C-content/dry mass of fats and oils considered 75%, from: ecoinvent v2.2 report, n 15a, pg 40
  note on heating value, net: Literature value, Source: IPCC 2006, 2006 IPCC Guidelines for National Greenhouse Gas Inventories, Prepared by the National Greenhouse Gas Inventories Programme, Eggleston H.S., Buendia L., Miwa K., Ngara T. and Tanabe K. (eds). Published: IGES, Japan
- municipal solid waste: -4.14891e-8, -2.90324e-8, -6.769e-6, -8.14878e-5, -1.1522e-7 kg (5 suppliers, which the file names only by identifier); sum of these -8.84426e-5 kg
  Adapted from the dataset 'wood chips, in cogen 6400kWth, wood', according to actual water, carbon and energy content of the fuel (pressed sorghum bagasse)
  EcoSpold01Location=CH
  production volume
    Calculated from the production volume of ethanol, without water, in 95% solution state, from fermentation in proportion to the respective output amounts.
  properties: carbon content, fossil 0.171549, carbon content, non-fossil 0.261655, dry mass 0.771 kg, heating value, net 11.74 MJ, water content 0.297017, wet mass 1 kg
  note on carbon content, fossil: MSW composition in tab 4.1, ecoinvent v2.2 report 13_I. C content referred to 1 kg DM
  note on heating value, net: Value taken from the general comment of the treatment dataset.
- sodium chloride, powder: 0.000110554 kg; lognormal variance with pedigree 0.072, pedigree (4,4,5,5,1)
  (same comment as for chlorine, liquid)
  properties: dry mass 1 kg, wet mass 1 kg
- sulfuric acid: 0.00732938, 0.0304114 kg (2 suppliers, which the file names only by identifier); sum of these 0.0377407 kg; lognormal variance with pedigree 0.0726, pedigree (2,4,5,5,3)
  EcoSpold01Location=RER
  Etha+ project Alcosuisse, industrial data
  Uncertainty: etha+ project Alcosuisse, industrial data
  properties: dry mass 1 kg, wet mass 1 kg
- sweet sorghum stem: 17.1807 kg; lognormal variance with pedigree 0.0426, pedigree (2,1,5,5,1)
  EcoSpold01Location=CN
  Average ethanol yields in China, literature survey
  Uncertainty: Average ethanol yields in China, literature survey
  properties: carbon content, non-fossil 0.425926, dry mass 0.27 kg, water content 2.7037, wet mass 1 kg
  note on carbon content, non-fossil: C content 0.115 kg/kg fresh mass. ecoinvent v2.2 report n 17, Tab 11.2
- tap water: 14.7035 kg; lognormal variance with pedigree 0.042, pedigree (1,1,5,5,1)
  Literature survey, industrial data
  EcoSpold01Location=RER
  Uncertainty: Literature survey, industrial data
  properties: carbon content, fossil 0.00178991, dry mass 0.000337476 kg, water content 2962.17, wet mass 1 kg
  note on carbon content, fossil: Bicarbonate content is 2.93 mol/m3. CO2 content is 0.1 mol/m3 (ecoinvent v2.2 report 8, Tab 93.1).
- vinasse, from fermentation of sweet sorghum: -13.2018 kg; name BP_amount_3
  EcoSpold01Location=CN
  production volume
    (same comment as for bagasse, from sweet sorghum)
  properties: carbon content, non-fossil 0.12867, dry mass 0.15 kg, price 0.000648 EUR2005, water content 5.66667, wet mass 1 kg
  note on carbon content, non-fossil: The carbon content of all vinasses was assumed to be 0.12867 kg per dry matter (ecoinvent v2.2 report n 17, pg 281, vinasse from sugar beet)
- waste mineral oil: -6.00995e-7, -2.42767e-5, -6.35649e-5 kg (3 suppliers, which the file names only by identifier); sum of these -8.84426e-5 kg
  (same comment as for municipal solid waste)
  production volume
    (same comment as for municipal solid waste)
  properties: carbon content, fossil 0.864444, dry mass 0.9 kg, heating value, net 34.7 MJ, water content 0.111111, wet mass 1 kg
  note on carbon content, fossil: Tab A.6, ecoinvent v2.2 report 13_I. C content has been calculated after data in the tables, and then referred to 1 kg DM
- wastewater, average: -4.06386e-6, -6.05088e-8, -1.6995e-5, -1.02131e-7 m3 (4 suppliers, which the file names only by identifier); sum of these -2.12215e-5 m3
  (same comment as for municipal solid waste)
  production volume
    (same comment as for municipal solid waste)
  properties: carbon content, non-fossil 0.194039, dry mass 0.346837 kg, water content 2882.2, wet mass 1000 kg
  note on carbon content, non-fossil: 0.0673 kg TOC/m3 (Tab A.17, ecoinvent v2.2 report 13_I). TOC was considered as Total Carbon.
- water, decarbonised: 0.000576949, 0.00715615, 4.04882e-5, 0.000733404, 7.0252e-7, 0.00110638, 0.000431728, 0.000223042, 0.00843024, 0.00134395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 kg (12 suppliers, which the file names only by identifier); sum of these 0.0212215 kg; lognormal variance with pedigree 0.072, pedigree (4,4,5,5,1)
  (same comment as for chlorine, liquid)
  properties: wet mass 1 kg
- wood ash mixture, pure: -0.00957683, -9.44156e-5, -0.00459299 kg (3 suppliers, which the file names only by identifier); sum of these -0.0142642 kg
  EcoSpold01Location=CH
  Adapted from the dataset 'wood chips, in cogen 6400kWth, wood', according to actual water, carbon and energy content of the fuel (pressed sorghum bagasse)
  production volume
    (same comment as for municipal solid waste)
  properties: carbon content, non-fossil 0.012, dry mass 1 kg, wet mass 1 kg

## Inputs from nature
- Carbon dioxide, in air [natural resource, in air]: 1.06663 kg; lognormal variance with pedigree 0.042, pedigree (1,1,5,5,1)
  Calculation, to close carbon balance
  Uncertainty: Calculation, to close carbon balance

## Emissions to nature
- Acetaldehyde [air, urban air close to ground]: 1.64482e-6 kg; lognormal variance with pedigree 0.112, pedigree (4,4,5,5,1)
  Adapted from the dataset 'wood chips, in cogen 6400kWth, wood', according to actual water, carbon and energy content of the fuel (pressed sorghum bagasse)
  Uncertainty: Adapted from the dataset 'wood chips, in cogen 6400kWth, wood', according to actual water, carbon and energy content of the fuel (pressed sorghum bagasse)
- Ammonia [air, urban air close to ground]: 4.69186e-5 kg; lognormal variance with pedigree 0.082, pedigree (4,4,5,5,1)
  (same comment as for Acetaldehyde)
- Arsenic ion [air, urban air close to ground]: 2.6965e-8 kg; lognormal variance with pedigree 0.722, pedigree (4,4,5,5,1)
  (same comment as for Acetaldehyde)
- Benzene [air, urban air close to ground]: 2.2005e-5 kg; lognormal variance with pedigree 0.112, pedigree (4,4,5,5,1)
  (same comment as for Acetaldehyde)
- Benzene, ethyl- [air, urban air close to ground]: 7.25419e-7 kg; lognormal variance with pedigree 0.112, pedigree (4,4,5,5,1)
  (same comment as for Acetaldehyde)
- Benzene, hexachloro- [air, urban air close to ground]: 1.74109e-13 kg; lognormal variance with pedigree 0.372, pedigree (4,4,5,5,1)
  (same comment as for Acetaldehyde)
- Benzo(a)pyrene [air, urban air close to ground]: 1.20904e-8 kg; lognormal variance with pedigree 0.372, pedigree (4,4,5,5,1)
  (same comment as for Acetaldehyde)
- Bromine [air, urban air close to ground]: 1.61787e-6 kg; lognormal variance with pedigree 0.722, pedigree (4,4,5,5,1)
  (same comment as for Acetaldehyde)
- Cadmium II [air, urban air close to ground]: 1.88747e-8 kg; lognormal variance with pedigree 0.722, pedigree (4,4,5,5,1)
  (same comment as for Acetaldehyde)
- Calcium [air, urban air close to ground]: 0.000157742 kg; lognormal variance with pedigree 0.722, pedigree (4,4,5,5,1)
  (same comment as for Acetaldehyde)
- Carbon dioxide, non-fossil [air, urban air close to ground]: 5.30401 kg; lognormal variance with pedigree 0.042, pedigree (1,1,5,5,1)
  Calculation, to close carbon balance (incl. carbon from the combustion of bagasse)
  Uncertainty: Calculation, to close carbon balance (incl. carbon from the combustion of bagasse)
- Carbon monoxide, non-fossil [air, urban air close to ground]: 0.000169264 kg; lognormal variance with pedigree 0.722, pedigree (4,4,5,5,1)
  (same comment as for Acetaldehyde)
- Chlorine [air, urban air close to ground]: 4.85353e-6 kg; lognormal variance with pedigree 0.112, pedigree (4,4,5,5,1)
  (same comment as for Acetaldehyde)
- Chromium III [air, urban air close to ground]: 1.06779e-7 kg; lognormal variance with pedigree 0.722, pedigree (4,4,5,5,1)
  (same comment as for Acetaldehyde)
- Chromium VI [air, urban air close to ground]: 1.07858e-9 kg; lognormal variance with pedigree 0.722, pedigree (4,4,5,5,1)
  (same comment as for Acetaldehyde)
- Copper ion [air, urban air close to ground]: 5.93214e-7 kg; lognormal variance with pedigree 0.722, pedigree (4,4,5,5,1)
  (same comment as for Acetaldehyde)
- Dinitrogen monoxide [air, urban air close to ground]: 6.20187e-5 kg; lognormal variance with pedigree 0.112, pedigree (4,4,5,5,1)
  (same comment as for Acetaldehyde)
- Dioxins, measured as 2,3,7,8-tetrachlorodibenzo-p-dioxin [air, urban air close to ground]: 7.49592e-13 kg; lognormal variance with pedigree 0.372, pedigree (4,4,5,5,1)
  (same comment as for Acetaldehyde)
- Fluorine [air, urban air close to ground]: 1.34822e-6 kg; lognormal variance with pedigree 0.112, pedigree (4,4,5,5,1)
  (same comment as for Acetaldehyde)
- Formaldehyde [air, urban air close to ground]: 3.14354e-6 kg; lognormal variance with pedigree 0.112, pedigree (4,4,5,5,1)
  (same comment as for Acetaldehyde)
- Hydrocarbons, aliphatic, alkanes, unspecified [air, urban air close to ground]: 2.2005e-5 kg; lognormal variance with pedigree 0.112, pedigree (4,4,5,5,1)
  (same comment as for Acetaldehyde)
- Hydrocarbons, aliphatic, unsaturated [air, urban air close to ground]: 7.49592e-5 kg; lognormal variance with pedigree 0.112, pedigree (4,4,5,5,1)
  (same comment as for Acetaldehyde)
- Lead II [air, urban air close to ground]: 6.7142e-7 kg; lognormal variance with pedigree 0.722, pedigree (4,4,5,5,1)
  (same comment as for Acetaldehyde)
- Magnesium [air, urban air close to ground]: 9.73422e-6 kg; lognormal variance with pedigree 0.722, pedigree (4,4,5,5,1)
  (same comment as for Acetaldehyde)
- Manganese II [air, urban air close to ground]: 4.61094e-6 kg; lognormal variance with pedigree 0.722, pedigree (4,4,5,5,1)
  (same comment as for Acetaldehyde)
- Mercury II [air, urban air close to ground]: 8.08934e-9 kg; lognormal variance with pedigree 0.722, pedigree (4,4,5,5,1)
  (same comment as for Acetaldehyde)
- Methane, non-fossil [air, urban air close to ground]: 1.04945e-5 kg; lognormal variance with pedigree 0.112, pedigree (4,4,5,5,1)
  (same comment as for Acetaldehyde)
- NMVOC, non-methane volatile organic compounds [air, urban air close to ground]: 1.47501e-5 kg; lognormal variance with pedigree 0.112, pedigree (4,4,5,5,1)
  (same comment as for Acetaldehyde)
- Nickel II [air, urban air close to ground]: 1.61787e-7 kg; lognormal variance with pedigree 0.722, pedigree (4,4,5,5,1)
  (same comment as for Acetaldehyde)
- Nitrogen oxides [air, urban air close to ground]: 0.00237282 kg; lognormal variance with pedigree 0.112, pedigree (4,4,5,5,1)
  (same comment as for Acetaldehyde)
- PAH, polycyclic aromatic hydrocarbons [air, urban air close to ground]: 2.65991e-7 kg; lognormal variance with pedigree 0.372, pedigree (4,4,5,5,1)
  (same comment as for Acetaldehyde)
- Particulate Matter, < 2.5 um [air, urban air close to ground]: 0.00108571 kg; lognormal variance with pedigree 0.372, pedigree (4,4,5,5,1)
  (same comment as for Acetaldehyde)
- Phenol, pentachloro- [air, urban air close to ground]: 1.95859e-10 kg; lognormal variance with pedigree 0.112, pedigree (4,4,5,5,1)
  (same comment as for Acetaldehyde)
- Phosphorus [air, urban air close to ground]: 8.08934e-6 kg; lognormal variance with pedigree 0.112, pedigree (4,4,5,5,1)
  (same comment as for Acetaldehyde)
- Potassium I [air, urban air close to ground]: 0.00063096 kg; lognormal variance with pedigree 0.722, pedigree (4,4,5,5,1)
  (same comment as for Acetaldehyde)
- Sodium [air, urban air close to ground]: 3.50537e-5 kg; lognormal variance with pedigree 0.722, pedigree (4,4,5,5,1)
  (same comment as for Acetaldehyde)
- Sulfur dioxide [air, urban air close to ground]: 6.7142e-5 kg; lognormal variance with pedigree 0.072, pedigree (4,4,5,5,1)
  (same comment as for Acetaldehyde)
- Toluene [air, urban air close to ground]: 7.25419e-6 kg; lognormal variance with pedigree 0.112, pedigree (4,4,5,5,1)
  (same comment as for Acetaldehyde)
- Water [air, unspecified]: 1.35821e-5 m3; lognormal variance with pedigree 0.0827, pedigree (2,2,5,5,1)
  Calculated value based on literature values and expert opinion. See comments in the parametres' comment field.
- Zinc II [air, urban air close to ground]: 8.08934e-6 kg; lognormal variance with pedigree 0.722, pedigree (4,4,5,5,1)
  (same comment as for Acetaldehyde)
- m-Xylene [air, urban air close to ground]: 2.90164e-6 kg; lognormal variance with pedigree 0.112, pedigree (4,4,5,5,1)
  (same comment as for Acetaldehyde)
- Water [water, unspecified]: 0.0147107 m3; lognormal variance with pedigree 0.0827, pedigree (2,2,5,5,1)
  (same comment as for Water)
  property carbon content, fossil 0; name C_content_fossil
  property carbon content, non-fossil 0; name C_content_non_fossil
  property water in wet mass 1000 kg; name WWM

## Sampling procedure
Data is from the etha+ project (Alcosuisse, CH) and the ASIATIC project (LASEN, CH), technology by French ethanol plant supplier, modelling by ENERS (CH)

## Extrapolations
Direct emissions (resulting from the combustion of sorghum bagasse) are based on the the combustion of wood chips (without emission control), according to the corresponding dry matter content, carbon content and energy content. This dataset has been copied from an original dataset covering the geography CN. The uncertainty has been adjusted accordingly.

## Review by Niels Jungbluth 2006-08-15
Passed.
none

## Review by Emilia Moreno Ruiz 2013-04-12
PV corrected
