# heat, from municipal waste incineration to generic market for heat district or industrial, other than natural gas

Dataset: EcoSpold 2, unit process
Geography: BG
Time period: 2008-01-01 to 2022-12-31
Technology level: current
Classification: ISIC rev.4 ecoinvent: 3530:Steam and air conditioning supply
Synonyms: waste-to-energy; WTE
Scenario: Business-as-Usual
System model: Substitution, consequential, long-term
Share of production covered: 100 %
Generated by: Karin Treyer
Published in: Doka G. 2013
Database: ecoinvent
isCopyrightProtected: true

## General comment
This dataset changes the names of the (internally used) heat product of waste incineration and connects it with the external grid and the respective average energy markets (district heat grid).

## Reference product
- heat, for reuse in municipal waste incineration only: 1 MJ; name E_th_prod_MSWI; source Doka G. 2013; By-product classification allocatable product; CPC 17300: Steam and hot water; lognormal variance with pedigree 0.008, pedigree (1,1,4,1,1)
  useful heat produced in municipal waste incineration (internal)
  Uncertainty: a
  production volume 1 MJ
  properties: carbon allocation 0 kg, carbon content 0, price 0 EUR2005

## Inputs from technosphere
- heat, district or industrial, other than natural gas: 1 MJ; = E_th_prod_MSWI; source Doka G. 2013
  Net heat from municipal waste incineration fed in to district heating grid
  production volume
    Calculated value. Please take into account that the annual production volume of the municipal solid waste is a rough estimate only.
    Adjusted to account for the correct share of heat from waste in the EU-28 on the market for heat, district or industrial, Europe without Switzerland in ecoinvent.
    Share according to http://www.iea.org/statistics/statisticssearch/report/?country=EU28&product=electricityandheat&year=2012
  properties: heating value, net 1 MJ, price 0.0106 EUR2005
