# heavy mineral sand quarry operation and titania slag production

Dataset: EcoSpold 2, unit process
Geography: ZA
Time period: 2015-01-01 to 2022-12-31
Technology level: current
Classification: ISIC rev.4 ecoinvent: 0729:Mining of other non-ferrous metal ores
Synonyms: Titanium slag
Scenario: Business-as-Usual
System model: Substitution, consequential, long-term
Share of production covered: 72 %
Generated by: Russo
Published in: Charikinya E. 2017
Database: ecoinvent
isCopyrightProtected: true

## General comment
Heavy mineral sands are a class of ore deposit which is an important source heavy minerals - hence the name. The density of these mineral is generally above 2.9 gr/cm3. Important heavy mineral are: zirconium, titanium, thorium, tungsten, rare-earth elements, the industrial minerals diamond, sapphire, garnet, and occasionally precious metals or gemstones (kyanite, tourmaline, titanite, apatite).

The source materials of heavy mineral sand are metamorphic and igneous rocks. Metamorphic rocks give rise to sand containing kyanite and garnet, for example, although the latter may crystallise from magma as well. Magnetite is mostly of igneous origin.

Heavy mineral sands are placer deposits formed most usually in beach environments by concentration due to the specific gravity of the mineral grains. It is equally likely that some concentrations of heavy minerals (aside from the usual gold placers) exist within streambeds, but most are of a low grade and are relatively small.
Heavy mineral sand is a natural mineral concentrate which is often mined commercially. Zircon, gold, ilmenite, rutile, monazite, and cassiterite are some noteworthy heavy minerals that are often extracted from sand. Heavy mineral sand is not rare, but its area of occurrence is usually limited.

## Included activities start
Activities include the harvesting of the sands via a system of ponds and floating dredges and the concentration, done on a floating gravity separation plant. The concentrator produces two streams, which are transported to the second location where the Mineral Separation Plant (MSP) and the smelter are situated.

## Included activities end
At the MSP the various minerals are separated to produce zircon, rutile and ilmenite.
The ilmenite is smelted to produce titania slag (85% TiO2) as Reference product: more high quality (low manganese content) pig iron is produced as a by-product in this stage.

## Geography
Heavy mineral sands in South Africa: Two major heavy mineral sands companies were identified. The first is Richards Bay Minerals (RBM) which is the biggest producer of titania slag in South Africa. The second company is Tronox which has an operation in the Western Cape named Namakwa Sands and an operation in KwaZulu Natal named KZN Sands. A third minor heavy mineral sands company called Tormin was identified. This company is located in the Western Cape, it does not however produce titania slag.

Tronox are a vertically integrated company. They produce titania slag in their South African operations and ship the slag to their titanium dioxide and pigment plants overseas. Thus the titania slag produced by Tronox never enters the local or global market. For this reason the Tronox operations are not being accounted for in this LCI for HMS with titania slag (85% TiO¬2) as the reference product.

Richards Bay Minerals are the largest heavy mineral sands operation in South Africa and are not a vertically integrated company, thus their titania slag enters the local global market. Table 1 below shows the size of the Rio Tintos RBM operation in relation to the two other companies operations for the year 2015. From these results we are confident that modelling the LCI on HMS for South Africa on the RBM operations is accurate.

It is worth noting that there are two distinct methods of mining heavy mineral sands in South Africa: dredge mining and truck and shovel mining. RBM and KZN sands utilises the first, while Namakwa Sands utilises the latter.

South Africa contributes to world market share of about 25 per cent of titanium dioxide feedstock (titania slag and rutile), 33 per cent of the world’s zircon output and 25 per cent of the world’s high purity pig iron.

## Technology
Richards Bay Minerals is situated north of Richards Bay in Zululand, within the uThungulu District Municipality. This is in the North-Eastern region of the province KwaZulu-Natal.
The mineral sands are harvested via a system of ponds and floating dredges and the concentration is done on a floating gravity separation plant. These two stages of the process take place in the same location. The concentrator produces two streams: a magnetic and non-magnetic stream. The magnetic stream consists of ilmenite while the non-magnetic stream consists of zircon and rutile.
This concentrate is transported to the second location where the Mineral Separation Plant (MSP) and the smelter are situated. At the MSP the various minerals are separated to produce zircon, rutile and ilmenite.
The ilmenite is smelted to produce titania slag (85% TiO2). High quality (low manganese content) pig iron is produced as a by-product in this stage. The ilmenite first undergoes an oxidizing roast followed by magnetic separation where the Cr2O3 fraction of the ilmenite is removed. The ilmenite is then partially reduced to 85% TiO2 slag in a six-in-line A.C. electric arc furnace

## Time period
Data spans over a period of 4 years (2012-2015), although the most recent and complete year (2015) was used ad year of reference.

## Parameters
- fraction_PW_to_air: 0.15 dimensionless
  Literature value. In case when no industry/process specific data are available, default evaporation fraction value is used. This value is 15% and is based on literature (Statistics Canada, 2007 & Shaffer, K.H., 2008, Consumptive water use in the Great Lakes Basin, USGS & Shiklomanov, 2003, World Water Resources at the Beginning of the 21st Century) and has been approved by an expert.
- life of a mine site: 64 year
- water used in primary activity: 0.0303 m3; name totWaterPA; = surface_water+water_unspecified
  sum of all water inputs to the operations

## Reference product
- titania slag, 85% titanium dioxide: 1 kg; name RP; By-product classification allocatable product; CPC 41601: Tungsten, molybdenum, tantalum, magnesium, cobalt, cadmium, titanium, zirconium, beryllium, gallium, hafnium, […]
  For the year 2015 the SDR’s did not report this value as a numerical value, but rather graphically. Thus the programme Inkscape was used to determine the value.
  The total concentrate produced by RBM was given in a diagram. This was multiplied by the percentage of the concentrate that was titania slag in order to give the value for Titania Slag (85% TiO2)
  The percentage was: 53,41%
  The percentage was calculated by finding the average ratio of the products produced by RBM from 2010 to 2012.
  % Titania slag = (Sum of Titania slag produced from 2010 to 2012)/(Sum of all products produced from 2010 to 2012). The largest application of titania slag is as a white pigment representing between the 95 and 98 % of worldwide TiO2 consumption. The remaining uses are as a flux for electric welding rods and in certain metallurgical and electronic applications. Being non toxic and biologically passive, it is even used in sweets, cosmetics, toothpaste and in sunscreens to absorb ultraviolet rays.
  production volume 9e8 kg
    According to USGS (2021), the production volume of titania slag in South Africa was estimated to be 900'000 metric tons in 2018.
    References:
    USGS (2021). Titanium Statistics and Information, Advance Data Release of the 2018 Annual Tables. https://prd-wret.s3.us-west-2.amazonaws.com/assets/palladium/production/atoms/files/myb1-2018-titan-adv.xlsx
  property price 0.403896 EUR2005
    Price approximated with the price of slag (80% to 95% TiO2) reported in the USGS Mineral Commodity Summaries for Titanium Mineral Concentrates from 2009 to 2018 (https://www.usgs.gov/centers/nmic/titanium-statistics-and-information). A lower bound and upper bound are given for the price each year. The lower bound is assumed to be representative of the price of titania slag with 85% TiO2 content. The prices given in USD were converted to EUR based on the annual exchange rates published by the European Central Bank (https://sdw.ecb.europa.eu/quickview.do?SERIES_KEY=120.EXR.A.USD.EUR.SP00.A), and then adjusted for inflation relative to 2005 by using the Harmonised Index of Consumer Prices (HICP) of the euro area, published by eurostat (https://ec.europa.eu/eurostat/databrowser/view/PRC_HICP_AIND/default/table).
  properties: carbon allocation 0 kg, carbon content 0, carbon content, fossil 0, carbon content, non-fossil 0, dry mass 1 kg, titanium content 0.51, water content 0, water in wet mass 0 kg, wet mass 1 kg

## Inputs from technosphere
- electricity, medium voltage: 1.9841 kWh; lognormal variance with pedigree 0.0407, pedigree (2,2,5,1,1)
  For the year 2015 the SDR’s did not report this value as a numerical value, but rather graphically. Thus the programme Inkscape was used to determine the value. Annual consuption of kWh 2138142350 was determined from the RBM, 2015 SD report using the following procedure: from the given picture in the SDR and there are no calibrations to accurately determine the value of electricity (GJ) for 2015. There Inkscape was used as it has a built in ruler. The following steps were taken:
  1-A ratio was determined by using the point circled in red. One knows can determine, using the built in ruler, that 2 000 000 GJ corresponds to 36.01 units on inkscape. Therefore the ratio is 2000000/36.01.
  2-Thus for 2015 the built in ruler was used to determine the length from the Y-axis to the point circle in blue: 138,59 units.
  3-The electricity usage for 2015 was thus 138,59 * (2000000/36.01).
  4-This value was then converted from GJ to kWh and then rescaled to 1 kg of titania slag produce.
- hard coal: 0.1851 kg; lognormal variance with pedigree 0.0407, pedigree (2,2,5,1,1)
  This represent the fuel used to produce the heat for the smelter. This has been obtained by multiplying the anthracite (coal) calorifc value by the enegry consumption (redported in the SD report, see below) due to the burning of the anthracite. The reported value for the total energy consumption it was assumed to be for heating: sources are anthracite (mainly), electrodes, diesel, pertrol, paraffing and carbide. For the year 2015 the SDR’s did not report this value as a numerical value, but rather graphically. Thus the programme Inkscape was used to determine the value. Annual consumption of MJ 7340183,282, corresponding anthracite value of 199 493 457 kg.
  properties: carbon content, fossil 0.845, dry mass 0.94 kg, heating value, net 27.91 MJ, water content 0.0638298, wet mass 1 kg
  note on carbon content, fossil: C content 75-94% (specified in Tab 1.1, report 6, part VI). A mean content of 0.845 kg C/ kg dry hard coal was considered
  note on heating value, net: Based on the Characterization factor of Hard coal in the CED method
- inert waste: -0.0174 kg; name ByP_05; lognormal variance with pedigree 0.0009, pedigree (2,2,2,1,1)
  Non-mineral waste from titania slag production (non-hazardous waste). Annual production volume of 18755259,86 kg
  production volume
    Calculated from production volume of reference product using the relative outputs.
  properties: dry mass 1 kg, wet mass 1 kg
- mine infrastructure, bauxite: 5e-11 unit; = 1/(20*1000000000); lognormal variance with pedigree 0.178, pedigree (4,5,5,5,5)
  Calculated value from the infrastructure capacity of 1000000 ton/year, life time of 20 years and scaed down to 1kg of Titania slag, *5% Titanium dioxide produce.
  properties: lifetime capacity [kg] 2e10 kg
  note on lifetime capacity [kg]: 1E9 kg&year: 20 years lifetime. Source: ecoinvent v2 report 10-part I, Tab 5.1
- non-ferrous metal smelter: 7.54717e-12 unit; = 1/(50*2650000000); lognormal variance with pedigree 0.172, pedigree (4,4,5,5,5)
  Value estimated from the annual production volume produced by the infrastructure (2.650.000 ton metal /year) and lifetime of 50 years and scaled down to refer to 1 kg of Titania slag, 85% Titanium dioxide produce.
- non-sulfidic tailing, off-site: -0.63 kg; name ByP_04; lognormal variance with pedigree 0.0009, pedigree (2,2,2,1,1)
  This waste comes from the minerals separation plant, roaster plant and smelter clarifier.
  For the year 2015 the SDR’s did not report this value as a numerical value, but rather graphically. Thus the programme Inkscape was used to determine the value. Total annual production of kg 941168141,6
  production volume
    Calculated from production volume of reference product using the relative outputs.
  property calcium content 0.015356; name ByP_04_Ca_content
  property chromium content 0.00836; name ByP_04_Cr_content
  property iron content 0.20138; name ByP_04_Fe_content
  property phosphorus content 0.00197; name ByP_04_P_content
  property silicon content 0.027261; name ByP_04_Si_content
  property titanium content 0.140221; name ByP_04_Ti_content
  property zirconium content 0.0109; name ByP_04_Zr_content
  properties: dry mass 0.7 kg, water content 0.428571, wet mass 1 kg
  note on calcium content: calcium content on a dry matter basis; this is to represent Calcium content of the sulfidic tailing in the form of CaO
  note on chromium content: chromium content on a dry matter basis this is to represent Chromium content of the sulfidic tailing in the form of Cr2O3
  note on iron content: iron content on a dry matter basis; this is to represent Iron content of the sulfidic tailing in the form of Fe2O3
  note on phosphorus content: phosphorus content on a dry matter basis; this is to represent Phosphorous content of the sulfidic tailing in the form of P2O5
  note on silicon content: silicon content on a dry matter basis; this is to represent Silicon content of the sulfidic tailing in the form of Quartz
  note on titanium content: titanium content on a dry matter basis; this is to represent Titanium content of the sulfidic tailing in the form of Rutile, Ilmenite, Titanite, Leucoxene
  note on zirconium content: zirconium content on a dry matter basis; this is to represent Zirconium content of the sulfidic tailing in the form of Zircon
- pig iron: -0.5124 kg; name ByP_01; lognormal variance with pedigree 0.0009, pedigree (2,2,2,1,1)
  Pig Iron is a by product form the ilmenite smelting process. Ilmenite has the formula FrTiO3, thus the pig iron comes from the Fe that has removed in order to make the Titania slag TiO2. . Pig iron is a by-produc of the smelting operation and it is used as a raw material in foundries for the production of ductile iron casting. Ductile iron castin is used extensively throughout the world for the production of safey critical automotive parts, such as brake callipers and steering knuckles in car and trucks. For the year 2015 the SDR’s did not report this value as a numerical value, but rather graphically. Thus the programme Inkscape was used to determine the value.
  The total concentrate produced by RBM was given in a diagram. This was multiplied by the percentage of the concentrate that was pig iron in order to give the value for Pig Iron.
  The percentage was: 27,37%
  Percentage was calculated as described for Titania slag. Total annual production volume of 552161351,8
  production volume
    Calculated from production volume of reference product using the relative outputs.
  properties: carbon content, fossil 0.045, dry mass 1 kg, price 0.243 EUR2005, wet mass 1 kg
- rutile, 95% titanium dioxide: -0.0962 kg; name ByP_02; lognormal variance with pedigree 0.0009, pedigree (2,2,2,1,1)
  For the year 2015 the SDR’s did not report this value as a numerical value, but rather graphically. Thus the programme Inkscape was used to determine the value. Manufactures use rutile in welding rod as it stabilises the arc and protect the molten metal from oxidation - forming a superior welding joint. In its titanuim metal form it is used extensively in the aerospace and aviation industries because of its litghtness, strenght and corrosion - and heat resistance. These properties also make it ideal for use in artificial hip joints, pacemakers and spectacle frames.
  The total concentrate produced by RBM was given in a diagram. This was multiplied by the percentage of the concentrate that was rutile in order to give the value for Rutile (94% TiO2).
  The percentage was: 5,14%
  Percentage was calculated as described for Titania slag. Total annual production volume of kg 103669156,3
  production volume
    Calculated from production volume of reference product using the relative outputs.
  property titanium content 0.57; name ByP_02_Ti_content
  properties: dry mass 1 kg, price 0.710382 EUR2005, wet mass 1 kg
- zircon: -0.2636 kg; name ByP_03; lognormal variance with pedigree 0.0009, pedigree (2,2,2,1,1)
  For the year 2015 the SDR’s did not report this value as a numerical value, but rather graphically. Thus the programme Inkscape was used to determine the value.
  The total concentrate produced by RBM was given in a diagram. This was multiplied by the percentage of the concentrate that was zircon in order to give the value for Zircon.
  The percentage was: 14,08%
  Percentage was calculated as described for Titania slag. Total annual production volume of kg 284051700 Zircon is used in the production of ceramic tiles and sanitary ware. Refined to zirconia, it is used in a wide range of advanced ceramics, refractories, jewellery, electronic applications and many other industrial and domestic products. Zircon sand is also used in the foundry industry.
  production volume
    Calculated from production volume of reference product using the relative outputs.
  properties: aluminium content 0.0042344, dry mass 1 kg, hafnium content 0.014, iron content 0.0010491, oxygen content 0.346546, price 0.972251 EUR2005, silicon content 0.151938, titanium content 0.0017979, wet mass 1 kg, zirconium content 0.4976
  note on aluminium content: The composition of zircon (except for Zirconium and Hafnium content) is taken from the following report: (Source: http://eastminerals.asia/wp-content/uploads/2018/11/East-Minerals-Zircon-Sand-Standard.pdf), which describes the composition of typical zircon. It contains maximum concentration of compounds in zircon.The calculation of the individual contents of each compound in zircon is based on the subtotal masses of the elements in each compound.The subtotal masses are calculated using the molecular weight calculator. (Source: https://www.lenntech.com/calculators/molecular/molecular-weight-calculator.htm). The maximum content of Al2O3 in zircon is: 0.80%. The subtotal masses of Al2O3 are: Al:52.93%, O:47.08%.
  note on hafnium content: The Hafnium and Zirconium oxide contents (ZrO2 and HfO2) for typical zircon should be minimum 65% (Source: https://www.chemours.com/en/-/media/files/minerals/mineral-zircon-product-info.pdf). The calculation of the hafnium content in zircon is assumed to be 1.4%. The amount has been assumed is such a way in order to ensure i) that the sum of ZrO2 and HfO2 is minimum 65% ii) that no extra hafnium is produced in each product throughout the Hafnium production chain (due to different values contained in literature regarding the hafnium content in zircon). Finally, it should be noted that complete (zirconium-free) hafnium is not possible as there are bundled together. Therefore, the presence of zirconium in hafnium (in ppms) has not been taken into account for simplicity purposes.
  note on iron content: The composition of zircon (except for Zirconium and Hafnium content) is taken from the following report: (Source: http://eastminerals.asia/wp-content/uploads/2018/11/East-Minerals-Zircon-Sand-Standard.pdf), which describes the composition of typical zircon. It contains maximum concentration of compounds in zircon.The calculation of the individual contents of each compound in zircon is based on the subtotal masses of the elements in each compound.The subtotal masses are calculated using the molecular weight calculator. (Source: https://www.lenntech.com/calculators/molecular/molecular-weight-calculator.htm). The maximum content of Fe2O3 in zircon is: 0.15%. The subtotal masses of Fe2O3 are: Fe:69.94%, O:30.06%.
  note on oxygen content: Oxygen content in zircon is calculated as the sum of oxygen contents of each individual compound present (i.e ZrO2, HfO2, SiO2, Al2O3, TiO2 and Fe2O3) in zircon.The oxygen content in each compound is calculated by multiplying the amount of chemical compound content in zircon with the subtotal mass of oxygen in the compound using the molecular weight calculator. (Source: <https://www.lenntech.com/calculators/molecular/molecular-weight-calculator.htm>). The oxygen content of each compound is provided on the properties comment field of the other contained elements.
  note on silicon content: The composition of zircon (except for Zirconium and Hafnium content) is taken from the following report: (Source: http://eastminerals.asia/wp-content/uploads/2018/11/East-Minerals-Zircon-Sand-Standard.pdf), which describes the composition of typical zircon. It contains maximum concentration of compounds in zircon.The calculation of the individual contents of each compound in zircon is based on the subtotal masses of the elements in each compound.The subtotal masses are calculated using the molecular weight calculator. (Source: https://www.lenntech.com/calculators/molecular/molecular-weight-calculator.htm). The maximum content of SiO2 in zircon is: 32.5%. The subtotal masses of SiO2 are: Si:46.75%, O:53.26%.
  note on titanium content: The composition of zircon (except for Zirconium and Hafnium content) is taken from the following report: (Source: http://eastminerals.asia/wp-content/uploads/2018/11/East-Minerals-Zircon-Sand-Standard.pdf), which describes the composition of typical zircon. It contains maximum concentration of compounds in zircon.The calculation of the individual contents of each compound in zircon is based on the subtotal masses of the elements in each compound.The subtotal masses are calculated using the molecular weight calculator. (Source: https://www.lenntech.com/calculators/molecular/molecular-weight-calculator.htm). The maximum content of TiO2 in zircon is: 0.3%. The subtotal masses of TiO2 are: Ti:59.93%, O:40.06%.
  note on zirconium content: The Hafnium and Zirconium oxide contents (ZrO2 and HfO2) for typical zircon should be minimum 65% (Source: https://www.chemours.com/en/-/media/files/minerals/mineral-zircon-product-info.pdf). The calculation of the zircon content in zircon is based on the subtotal masses of the elements of the zircon sand (ZrSiO4).The subtotal masses are calculated using the molecular weight calculator. (Source: https://www.lenntech.com/calculators/molecular/molecular-weight-calculator.htm). The subtotal masses of ZrSiO4 are: Zr:49.76%, Si:15.32%, O:34.91. Finally, it should be noted that complete (hafnium-free) zirconium is not possible as there are bundled together. Therefore, the presence of hafnium in zirconium (in ppms) has not been taken into account for simplicity purposes.

## Inputs from nature
- Gangue [natural resource, in ground]: 2.60406 kg; lognormal variance with pedigree 0.0027, pedigree (2,2,3,1,1)
  Calculated from TiO2 and Fe-Ti oxides, mainly ilmenite and rutile and its alteration products, zirconium in ground in the sand mined (5.1313e+10 kg).
  Total annual extraction of kg 2.806290+09 kg
- Iron [natural resource, in ground]: 0.62462 kg; lognormal variance with pedigree 0.0027, pedigree (2,2,3,1,1)
  Calculated from TiO2 and Fe-Ti oxides, mainly ilmenite in ground in the sand mined (5.1313e+10 kg).
  Total annual extraction of kg 6.212487+08 kg
- Occupation, mineral extraction site [natural resource, land]: 0.0481101 m2*year; = land_disturbed*mine_lifespan; lognormal variance with pedigree 0.0407, pedigree (2,2,5,1,1)
  Calculated from the land disturbed and the lifespas of a mining site (64 year, RMB, 2015 SD report).
- Titanium [natural resource, in ground]: 0.752073 kg; lognormal variance with pedigree 0.0407, pedigree (2,2,5,1,1)
  Calculated from TiO2 and Fe-Ti oxides, mainly ilmenite and rutile and its alteration products, in ground in the sand mined (5.1313e+10 kg).
  Total annual extraction of kg 5,928857e+08 kg
- Transformation, from unspecified [natural resource, land]: 0.00075172 m2; lognormal variance with pedigree 0.0407, pedigree (2,2,5,1,1)
  Land disturbed
- Transformation, to mineral extraction site [natural resource, land]: 0.00075172 m2; name land_disturbed; lognormal variance with pedigree 0.0407, pedigree (2,2,5,1,1)
  Land disturbed
- Water, river [natural resource, in water]: 0.013 m3; name surface_water; lognormal variance with pedigree 0.0407, pedigree (2,2,5,1,1)
  Referred to as: “Total Water Withdrawal By Source (m3)”. Annual consumption of m3 14004629,63.
  For the year 2015 the SDR’s did not report this value as a numerical value, but rather graphically. Thus the programme Inkscape was used to determine the value.
  From uMfolozi river, lake Nhlabane and Lake Nsese.
- Water, unspecified natural origin [natural resource, in water]: 0.0173 m3; name water_unspecified; lognormal variance with pedigree 0.0407, pedigree (2,2,5,1,1)
  This value was calculated from subtracting the surface water (‘total water withdrawn from source’) from ‘total water consumed per operation’. Annual consumption of m3 18685675,39
  .
  The values of total water consumed per operation is only reported until 2012. The 2015 SDR only gives “Total water withdrawal by source”.
  A graph was plotted for total water consumed per operation vs titania slag production. A trendline was used from Microsoft Excel with the equation
  y = 22 993 885,20ln(x) - 445 537 813,22.
  The y-value is the total water consumed per operation (m3). The 2015 value for Titania Slag produced (x-value) was used to calculate the 2015 total water consumed per operation value.
- Zirconium [natural resource, in ground]: 0.193759 kg; lognormal variance with pedigree 0.0407, pedigree (2,2,5,1,1)
  Calculated from the % of Zirconium in the mined sand.Source; Philander, C. and Rozendaal, A., 2013. The application of a novel geometallurgical template model to characterise the Namakwa Sands heavy mineral deposit, West Coast of South Africa. Minerals Engineering, 52, pp.82-94.
  Total annual extraction value of kg 1.488329e+08.

## Emissions to nature
- Carbon dioxide, fossil [air, non-urban air or from high stacks]: 0.47481 kg
  Reported CO2 emission, scope1: 0.47481 kg/ kg of Titania slag produced, inclusive of the buring of coal and other activities/materials (carbide, diesel, electrodes, land cleared, paraffin and petrol). Additionally, there is also CO2 emission, scope 2: 1,7601kg/kg of Titania slag produced. For the year 2015 the SDR’s did not report this value as a numerical value, but rather graphically. Thus the programme Inkscape was used to determine the value. Total annual emission CO2-scope1: kg 511685.728 Total annual emission CO2-scope2: kg 189681.504 Total annual emission Co2-scope2: kg 69368.4734
- Nitrogen oxides [air, non-urban air or from high stacks]: 0.00048 kg; lognormal variance with pedigree 0.0407, pedigree (2,2,5,1,1)
  For the year 2015 the SDR’s did not report this value as a numerical value, but rather graphically. Thus the programme Inkscape was used to determine the value. Total annual emission of kg 521134,86
- Particulate Matter, < 2.5 um [air, non-urban air or from high stacks]: 0.000231 kg; lognormal variance with pedigree 0.582, pedigree (4,4,5,5,5)
  Data from the existing GLO dataset "heavy mineral sand quarry operation"
- Particulate Matter, > 10 um [air, non-urban air or from high stacks]: 0.00112 kg; lognormal variance with pedigree 0.312, pedigree (4,4,5,5,5)
  Data from the existing GLO dataset "heavy mineral sand quarry operation"
- Particulate Matter, > 2.5 um and < 10um [air, non-urban air or from high stacks]: 0.00056 kg; lognormal variance with pedigree 0.0407, pedigree (2,2,5,1,1)
  For the year 2015 the SDR’s did not report this value as a numerical value, but rather graphically. Thus the programme Inkscape was used to determine the value. Annual particulates emission of kg 599113,87
- Radium-226 [air, non-urban air or from high stacks]: 0.000441 kBq; lognormal variance with pedigree 0.582, pedigree (4,4,5,5,5)
  Data from the existing GLO dataset "heavy mineral sand quarry operation"
- Sulfur dioxide [air, non-urban air or from high stacks]: 0.00011512 kg; lognormal variance with pedigree 0.0407, pedigree (2,2,5,1,1)
  For the year 2015 the SDR’s did not report this value as a numerical value, but rather graphically. Thus the programme Inkscape was used to determine the value. Total annual emission of kg 124057,52
- Thorium-232 [air, non-urban air or from high stacks]: 0.000277 kBq; lognormal variance with pedigree 0.582, pedigree (4,4,5,5,5)
  Data from the existing GLO dataset "heavy mineral sand quarry operation"
- Uranium-238 [air, non-urban air or from high stacks]: 0.000128 kBq; lognormal variance with pedigree 0.582, pedigree (4,4,5,5,5)
  Data from the existing GLO dataset "heavy mineral sand quarry operation"
- Water [air, non-urban air or from high stacks]: 0.004545 m3; name water_to_air; = totWaterPA*fraction_PW_to_air; lognormal variance with pedigree 0.0407, pedigree (2,2,5,1,1)
  Water emission to air
- Iron ion [water, surface water]: 1.77e-5 kg; lognormal variance with pedigree 0.932, pedigree (4,4,5,5,5)
  Data from the existing GLO dataset "heavy mineral sand quarry operation"
- Suspended solids, unspecified [water, surface water]: 0.000354 kg; lognormal variance with pedigree 0.322, pedigree (4,4,5,5,5)
  Data from the existing GLO dataset "heavy mineral sand quarry operation"
- Water [water, surface water]: 0.025755 m3; name water_to_surface_water; = totwaterPA*(1-fraction_PW_to_air); lognormal variance with pedigree 0.0407, pedigree (2,2,5,1,1)
  water emission to water

## Sampling procedure
The data was collected from the published 2012 and 2015 Sustainable Development Reports. Additional information was found in academic reports and journals; Richards Bay Minerals, 2015 Sustainable Development Report (RBM, 2015)
Richards Bay Minerals, 2012 Sustainable Development Repor t(RBM, 2012)
Philander, C. and Rozendaal, A., 2013. The application of a novel geometallurgical template model to characterise the Namakwa Sands heavy mineral deposit, West Coast of South Africa. Minerals Engineering, 52, pp.82-94.

## Extrapolations
From 2012 onwards, the reports no longer reported the data numerically and changed to reporting it graphically. Because of this, in order to get numerical values, a programme called Inkscape was used to extract numerical values from the graphs in the SDRs.
