# esterification of rape oil

Dataset: EcoSpold 2, unit process
Geography: RoW
Time period: 1996-01-01 to 2022-12-31
Technology level: current
Classification: EcoSpold01Categories: biomass/fuels
Classification: ISIC rev.4 ecoinvent: 1920:Manufacture of refined petroleum products
Tags: ConvertedDataset
Scenario: Business-as-Usual
System model: Substitution, consequential, long-term
Share of production covered: 0 %
Generated by: Edgard Gnansounou
Published in: Jungbluth N. 2007
Database: ecoinvent
isCopyrightProtected: true

## General comment
Inventory refers to the production of 1 kg rape rape methyl ester, respectively glycerine and potassium sulphate, from rape oil. The multioutput-process 'rape oil, in esterification plant' delivers the co-products 'rape methyl ester, at esterification plant', 'glycerine, from rape oil, at esterification plant', 'potassium sulphate, as K2O, from rape oil, at esterification plant'. Economic allocation with allocation factor of 86.9% to rape oil, 12.9% to glycerine and 0.2% to potassium sulphate. Allocation of CO2 emissions is done according to carbon balance.

## Included activities end
This process includes the esterification process of oil to methyl ester, glycerine and potassium sulphate, intermediate storage of the oil and products, treatment of specific wastewater effluents. System boundary is at the esterification plant.

## Geography
Data from different plants worldwide (incl. literature data)

## Technology
Typical vegetable oil esterification plant designed for the production of methyl ester (for use in the vehicle fuels market), global context. Base-catalyzed transesterification.

## Time period
Data from 1996 to 2003, current technology in the EU

## Parameters
- fraction, cooling water, cooling pond system, to air: 0.032 dimensionless; name fraction_CW_CP_to_air; lognormal variance with pedigree 0.0413, pedigree (2,3,1,3,1)
  Calculated based on literature value (Scown, C.D., 2011, Water Footprint of U.S. Transportation Fuels and supplying information of the article) (Vionnet, S., Quantis Water Database - Technical Report, 2012).
- fraction, cooling water, once-through system, to air: 0.004 dimensionless; name fraction_CW_OT_to_air; lognormal variance with pedigree 0.0413, pedigree (2,3,1,3,1)
  (same comment as for fraction, cooling water, cooling pond system, to air)
- fraction, cooling water, recirculating system, to air: 0.771 dimensionless; name fraction_CW_R_to_air; lognormal variance with pedigree 0.0413, pedigree (2,3,1,3,1)
  (same comment as for fraction, cooling water, cooling pond system, to air)
- fraction, cooling water, to air: 0.3875 dimensionless; name fraction_CW_to_air; = (0.5*fraction_CW_OT_to_air)+(0.5*fraction_CW_R_to_air); lognormal variance with pedigree 0.092025, pedigree (4,4,3,2,4)
  Calculated value based on literature value (see comments of the other parametres present in this dataset) and expert opinion. In the case when no industry/literature data are available about the type of cooling or directly fraction, cooling water, to air specific for the process a default assumption is applied. It is assumed that the once-through cooling system is used in 50% of all cases and recirculating system is used in another 50% of all cases.
- fraction, process water, to air: 0.205 dimensionless; lognormal variance with pedigree 0.092025, pedigree (4,4,3,2,4)
- fraction, tap water, to air: 0.205 dimensionless; name fraction_TW_to_air; = fraction_PW_to_air; lognormal variance with pedigree 0.092025, pedigree (4,4,3,2,4)
  Calculated value. See comment in the other parametres present in this dataset. Tap water is considered to be always used as process water, thus process water fractions to air are applied to all tap water input flows to calculate the amount of water consumed in the processes.

## Reference product
- fatty acid methyl ester: 1 kg; name RP_amount_1; By-product classification allocatable product; CPC 35491: Biodiesel
  production volume 5.79352e9 kg
    Estimated based on literature value; Approx. 2'000 kt of rape oil were processed to RME in 2004 in the EU (estimated equal to all biodiesel production in Europe (except CH) according to F.O. Licht, World Ethanol and Biofuels Report, vol. 4, no. 16, (26 April 2006), p. 365.
    ).
    2.8E+9kg of vegetable oil methyl ester was produced in Europe in 2004.
    1.65E+10 kg of rapeseed was produced in Europe in 2005 (Faostat).
    5E+10 kg of rapeseed was produced in the world in 2005 (Faostat).
    The amount of vegetable oil methyl ester produced in the whole world is calculated to be (5E+10/1.65E+10*2.8E+9=) 8.64E+9 kg.
  property heating value, net 37.2 MJ
    Based on literature, report 17, page 439. Jungbluth, N., Chudacoff, M., Dauriat, A., Dinkel, F., Doka, G., Faist Emmenegger, M., Gnansounou, E., Kljun, N., Schleiss, K., Spielmann, M., Stettler, C., Sutter, J. 2007: Life Cycle Inventories of Bioenergy. ecoinvent report No. 17, Swiss Centre for Life Cycle Inventories, Dübendorf, CH.
  property price 0.817 EUR2005
    Temporary price data. Calculated as 90% of purchasers price based on: 2004 import and export prices (total trades (USD) divided by total weight (kg) in EU27, USA, China, Japan and India) from UN Commodity Trade Statistics Database (http://data.un.org/Explorer.aspxDatabase [Accessed 2 July 2010]). Commodity: 'Veg fats, oils or fractions hydrogenated, esterified'.
  properties: carbon allocation 0.773 kg, carbon content 0.773, carbon content, fossil 0.041, carbon content, non-fossil 0.732, dry mass 1 kg, water content 0, water in wet mass 0 kg, wet mass 1 kg

## Inputs from technosphere
- electricity, medium voltage: 0.00403869, 0.00279796, 0.000149969, 0.0333219, 0.000151108, 0.00191988 kWh (6 suppliers, which the file names only by identifier); sum of these 0.0423795 kWh; lognormal variance with pedigree 0.042, pedigree (1,1,5,5,1)
  Literature data & biodiesel producer
  EcoSpold01Location=UCTE
  Uncertainty: Literature data & biodiesel producer
- glycerin distillate bottom: -0.00912318 kg; name BP_amount_4
  Composition of potassium sulfate is considered for this by-product.
  production volume
    Calculated from production volume of reference product using the relative outputs.
  properties: dry mass 1 kg, oxygen content 0.367255, potassium content 0.448737, sulfur content 0.184008, wet mass 1 kg
  note on oxygen content: Oxygen content (on a dry matter basis) of glycerin distillate bottom is calculated from the molecular formula of the substance (here considered K2S1O4).
  note on potassium content: Potassium content (on a dry matter basis) of glycerin distillate bottom is calculated from the molecular formula of the substance (here considered K2S1O4).
  note on sulfur content: Sulfur content (on a dry matter basis) of glycerin distillate bottom is calculated from the molecular formula of the substance (here considered K2S1O4).
- glycerine: -0.109076 kg; name BP_amount_1
  EcoSpold01Location=RER
  production volume
    Calculated relative to output of methyl ester (0.109 kg / kg ME)
  properties: carbon content, non-fossil 0.391304, dry mass 1 kg, heating value, net 18 MJ, price 0.792 EUR2005, wet mass 1 kg
  note on carbon content, non-fossil: In Tab 17.4, ecoinvent v2.2 report n 17 C3H8O3. From palm oil
  note on heating value, net: Based on literature, Report 17: Jungbluth, N., Chudacoff, M., Dauriat, A., Dinkel, F., Doka, G., Faist Emmenegger, M., Gnansounou, E., Kljun, N., Schleiss, K., Spielmann, M., Stettler, C., Sutter, J. 2007: Life Cycle Inventories of Bioenergy. ecoinvent report No. 17, Swiss Centre for Life Cycle Inventories, Dübendorf, CH.
- heat, district or industrial, natural gas: 0.121492, 0.800672 MJ (2 suppliers, which the file names only by identifier); sum of these 0.922163 MJ; lognormal variance with pedigree 0.042, pedigree (1,1,5,5,1)
  EcoSpold01Location=RER
  Literature data & biodiesel producer
  Uncertainty: Literature data & biodiesel producer
  properties: heating value, net 1 MJ
- methanol: 0.113684 kg; lognormal variance with pedigree 0.042, pedigree (1,1,5,5,1)
  Literature data & biodiesel producer
  EcoSpold01Location=GLO
  Uncertainty: Literature data & biodiesel producer
  properties: carbon content, fossil 0.375, dry mass 1 kg, heating value, net 20 MJ, wet mass 1 kg
  note on heating value, net: Based on literature, page 533, Report 17: Jungbluth, N., Chudacoff, M., Dauriat, A., Dinkel, F., Doka, G., Faist Emmenegger, M., Gnansounou, E., Kljun, N., Schleiss, K., Spielmann, M., Stettler, C., Sutter, J. 2007: Life Cycle Inventories of Bioenergy. ecoinvent report No. 17, Swiss Centre for Life Cycle Inventories, Dübendorf, CH.
- phosphoric acid, industrial grade, without water, in 85% solution state: 0.00459344 kg; lognormal variance with pedigree 0.0427, pedigree (2,2,5,5,1)
  (same comment as for heat, district or industrial, natural gas)
  properties: dry mass 1 kg, wet mass 1 kg
- potassium hydroxide: 0.0113651 kg; lognormal variance with pedigree 0.0427, pedigree (2,2,5,5,1)
  (same comment as for heat, district or industrial, natural gas)
  properties: dry mass 0.856 kg, water content 0.168224, wet mass 1 kg
- rape oil, crude: 1.02832 kg; lognormal variance with pedigree 0.0521, pedigree (1,2,5,5,1)
  Literature data & biodiesel producer
  EcoSpold01Location=RER
  Uncertainty: Literature data & biodiesel producer
  properties: carbon content, non-fossil 0.776, dry mass 1 kg, heating value, net 23.51 MJ, wet mass 1 kg
  note on carbon content, non-fossil: In Tab 17.4, ecoinvent v2.2 report n 17 In Tab 17.4, ecoinvent v2.2 report n 17
- residual softwood, wet: 1.06635e-9 m3; lognormal variance with pedigree 0.042, pedigree (1,1,5,5,1)
  EcoSpold01Location=NORDEL
  Literature data & biodiesel producer
  Uncertainty: Literature data & biodiesel producer
  properties: carbon content, non-fossil 0.494, dry mass 450 kg, heating value, net 5962.7 MJ, water content 0.7, wet mass 765 kg
  note on carbon content, non-fossil: In Tab 17.4, ecoinvent v2.2 report n 17 C content of dry mass is 0.494 kgC/kg dry wood (ecoinvent v2.2 report 9)
- tap water: 0.000406624, 0.00204399, 0.000758739, 6.83892e-6, 0.000266741, 0.0102534, 0.00294554 kg (7 suppliers, which the file names only by identifier); sum of these 0.0166819 kg; source Sheenhan, J. 1998; lognormal variance with pedigree 0.0546, pedigree (3,3,5,5,1)
  Literature, environmental report
  Calculated based on literature (Sheenhan, J., 18, An Overview of Biodiesel and Petroleum Diesel Life Cycles; Omni Tech International, 2010, Life Cycle Impact of Soybean Production and Soy Industrial Products), (Vionnet, S., Quantis Water Database - Technical Report, 2012). Assumed to have the same water use as "soybean methyl ester, at esterification plant". The process starts when refined oil enters the plant. It includes the processes: prepurification, deacidification, transesterification, destilation, etc. It is assumed that 95% of water use is allocated to cooling water and 5% of water is allocated as process water.
  Literature, environmental report
  Calculated based on literature (Sheenhan, J., 18, An Overview of Biodiesel and Petroleum Diesel Life Cycles; Omni Tech International, 2010, Life Cycle Impact of Soybean Production and Soy Industrial Products), (Vionnet, S., Quantis Water Database - Technical Report, 2012). Assumed to have the same water use as "soybean methyl ester, at esterification plant". The process starts when refined oil enters the plant. It includes the processes: prepurification, deacidification, transesterification, destilation, etc. It is assumed that 95% of water use is allocated to cooling water and 5% of water is allocated as process water.
  EcoSpold01Location=RER
  Uncertainty: Literature, environmental report
  properties: carbon content, fossil 0.00178991, dry mass 0.000337476 kg, water content 2962.17, wet mass 1 kg
  note on carbon content, fossil: In Tab 17.4, ecoinvent v2.2 report n 17 Bicarbonate content is 2.93 mol/m3. CO2 content is 0.1 mol/m3 (ecoinvent v2.2 report 8, Tab 93.1).
- vegetable oil esterification facility: 9.34836e-10 unit; lognormal variance with pedigree 0.354, pedigree (1,4,5,5,1)
  EcoSpold01Location=CH
  Calculation, according to feed capacity and lifetime of the plant
  Uncertainty: Calculation, according to feed capacity and lifetime of the plant
- wastewater, average: -2.23172e-7, -6.2682e-5 m3 (2 suppliers, which the file names only by identifier); sum of these -6.29052e-5 m3; lognormal variance with pedigree 0.09, pedigree (5,5,1,5,1)
  EcoSpold01Location=CH
  Calculation, to close mass balance of process
  Uncertainty: Calculation, to close mass balance of process
  production volume
    Calculated from the production volume of rape methyl ester in proportion to the respective output amounts.
  properties: carbon content, non-fossil 0.194039, dry mass 0.346837 kg, mass concentration, TOC 0.1091 kg/m3, mass concentration, calcium 0.039453 kg/m3, mass concentration, chlorine 0.030031 kg/m3, mass concentration, hydrogen 0.013365 kg/m3, mass concentration, nitrogen 0.031015 kg/m3, mass concentration, oxygen 0.069824 kg/m3, mass concentration, sodium 0.06456 kg/m3, mass concentration, sulfur 0.015602 kg/m3, water content 2882.2, wet mass 1000 kg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
  note on carbon content, non-fossil: 0.0673 kg TOC/m3 (Tab A.17, ecoinvent v2.2 report 13_I). TOC was considered as Total Carbon.

## Inputs from nature
- Carbon dioxide, in air [natural resource, in air]: 0.144725 kg; lognormal variance with pedigree 0.042, pedigree (1,1,5,5,1)
  Calculation, to close carbon balance
  Uncertainty: Calculation, to close carbon balance
- Water, cooling, unspecified natural origin [natural resource, in water]: 0.000316956 m3; name water_cooling_UNO_input; source Sheenhan, J. 1998; lognormal variance with pedigree 0.0612, pedigree (2,3,5,5,3)
  Calculated based on literature (Sheenhan, J., 18, An Overview of Biodiesel and Petroleum Diesel Life Cycles; Omni Tech International, 2010, Life Cycle Impact of Soybean Production and Soy Industrial Products), (Vionnet, S., Quantis Water Database - Technical Report, 2012). Assumed to have the same water use as "soybean methyl ester, at esterification plant". The process starts when refined oil enters the plant. It includes the processes: prepurification, deacidification, transesterification, destilation, etc. The process ends when methyl ester leaves the plant. It is assumed that 95% of water use is allocated to cooling water and 5% of water is allocated as process water.
  property carbon content, fossil 0.0104329; name C_content_fossil
  property carbon content, non-fossil 0; name C_content_non_fossil
  property dry mass 0.1101 kg; name DM
  property water content 9081.65; name water_content
  property water in wet mass 999.89 kg; name WWM

## Emissions to nature
- Carbon dioxide, non-fossil [air, urban air close to ground]: 0.227614 kg; lognormal variance with pedigree 0.042, pedigree (1,1,5,5,1)
  Calculation, to close carbon balance
  Uncertainty: Calculation, to close carbon balance
- Water [air, unspecified]: 0.000126246 m3; name water_to_air_unspecified; lognormal variance with pedigree 0.0827, pedigree (2,2,5,5,1)
  Calculated value based on literature values and expert opinion. See comments in the parametres' comment field.
  property fraction, origin: fresh water 0.0270895; name fraction_origin_fresh_water
  property fraction, origin: salt water 0; name fraction_origin_salt_water
  property fraction, origin: unspecified 0.97291; name fraction_origin_unspecified
- Water [water, unspecified]: 0.000144493 m3; name water_to_water_unspecified; = (tap_water_input/1000)*(1-fraction_TW_to_air)+water_cooling_UNO_input*(1-fraction_CW_to_air)-0.0000629052108146728; lognormal variance with pedigree 0.0827, pedigree (2,2,5,5,1)
  (same comment as for Water)
  property fraction, origin: fresh water 0.0639453; name fraction_origin_fresh_water_Ww
  property fraction, origin: salt water 0; name fraction_origin_salt_water_Ww
  property fraction, origin: unspecified 0.936055; name fraction_origin_unspecified_Ww

## Sampling procedure
Cross-checking of various literature sources from 1998 to 2006

## Extrapolations
none This dataset has been copied from an original dataset covering the geography Europe without Switzerland. The uncertainty has been adjusted accordingly.

## Review by Niels Jungbluth 2006-08-15
Passed.
none

## Review by Emilia Moreno Ruiz 2012-03-16
name change from "rape methyl ester" to "vegetable oil methyl ester"
