# platinum group metal, extraction and refinery operations

Dataset: EcoSpold 2, unit process
Geography: ZA
Time period: 2015-01-01 to 2022-12-31
Technology level: current
Classification: ISIC rev.4 ecoinvent: 2420:Manufacture of basic precious and other non-ferrous metals
Scenario: Business-as-Usual
System model: Substitution, consequential, long-term
Share of production covered: 83 %
Generated by: Russo
Published in: Charikinya E. 2017
Database: ecoinvent
isCopyrightProtected: true

## General comment
This dataset represents data from four major platinum producing companies in South Africa Northam Platinum, Anglo American Platinum, Lonmin Platinum and Impala Platinum. Of the four only Anglo-American Platinum, Lonmin Platinum and Impala Platinum operate refineries. Platinum Group Metals (PGMs) is recovered through underground and open pit mining. The processing of the ore consists of concentration, smelting and refining. PGM mining in South Africa is located in the Bushveld Complex, which includes three distinct mineral-bearing reefs: The Merensky Reef, The UG2 Reef and Platreef.
[This dataset is meant to replace the following datasets:
- platinum group metal mine operation, ore with high rhodium content, ZA, 1995 - 2002]

## Included activities start
Activities start with receiving the PMGs concentrate from the mining and concentration operations

## Included activities end
Activities end with the producitonof the refined Platinum (grade 99.8%) and other base metals (Plladium, Rhodium, Gold, Nickel, Copper and Chrome). The datastes has an additional water input of wastewater of 36.8 m3 per kg of Platinum produced, but it is not included in the exchanges due to modelling requeriments in ecoinvent. It accounts for two water sources used, namely: non potable water fom external sources and waste or second class water used.

## Geography
THE BUSHVELD COMPLEX: The Bushveld Complex, formed some 2 billion years ago, is found in the northern part of South Africa, and is the world’s largest layered intrusion. This igneous body hosts more than half the work’s platinum group metals, and other associated minerals such as chromium, vanadium and refractory minerals.
The intrusion is divided into four limbs – the northern, southern, eastern and western limbs. The Bushveld Complex is made up of the Rustenburg Layered Suite, the Lebowa Granites and the Rooiberg Felsics. It is underlain by rocks from the Transvaal Supergroup and overlain by Karoo sediments.
The Rustenburg Layered Suite contains mainly mafic rocks and is divided into a number of different zones. The marginal zone is found around the edge of the intrusion, while from the base of the complex up is the Lower Zone, the Critical Zone, the Main Zone and lastly the Upper Zone.
The chromitite seams in the Critical Zone are divided into the lower, the middle and the upper groups (UG), with the LG6, UG1 and UG2 being of greatest economic importance.
The magnetite in the Upper Zone is rich in vanadium.
The Merensky Reef is found between the Critical and the Main Zone, and is rich in Platinum Group Elements (PGEs) – i.e. platinum, palladium, rhodium, iridium, osmium and ruthenium.The complex has its geographic centre located north of Pretoria and it covers over 66.000 km2.

PLATINUM IN HISTORY: The first known occurrence of platinum in an application dates back to 700BC in Egypt, where the metal was used in the Casket of Thebes (a little box decorated with hieroglyphics in gold, silver and an alloy of PGMs).
Much later, in the 1500s in South America, the Spanish Conquistadors found many occurrences of what they termed platina, while they were panning for gold. In Europe, scientists of the day had a difficult time of trying to categorise and find application for the metal, mainly because of its durability and other extraordinary properties. A breakthrough came in the 18th century when a Swedish researcher added arsenic to the metal, but it was only in 1782 that platinum was successfully melted by adding oxygen.
After a further 25 years it became possible to produce platinum commercially using this method, and the metal was used mainly for decorative purposes. With the scientific and technological progress in the enlightenment era, there were breakthroughs in the refining of platinum, followed by the discovery of palladium and rhodium. The catalytic properties of platinum became apparent for the first time, and the first fuel cell was devised in 1842 using platinum electrodes.
In England the collaborative work of Percival Norton Johnson and his apprentice George Matthey gave rise to the eponymous partnership Johnson and Matthey. Their work at the time culminated in perfecting the techniques of separation and refining of PGMs and casting the metal in homogeneous ingots.
At that stage supplies were difficult to source, and came primarily from Colombia, the Urals in Russia and from later discoveries in Canada, which became the world’s largest supplier until the mid 20th century.

PLATINUM MINING IN SOUTH AFRICA: In South Africa the discovery of the first platinum nuggets dates back to 1924. The geologist Hans Merensky’s follow-up work resulted in the discovery of two deposits, each around 100 kilometres in length, which became known as the Bushveld Igneous Complex. This discovery started with test work in the area around Mashishing (formerly known as Lydenburg). Based on successive encouraging findings, Merensky approached a circle of friends to raise funds to investigate any payable platinum deposits. He used the farm Maandagshoek as a base and later secured 23 claims, and worked quickly to locate other platinum occurrences in the area. Merensky’s work resulted in the naming of the Merensky reef. In 1925 follow-up work resulted in the identification of the eastern limb of the Bushveld Complex.
The mines on this geological structure have for many years produced more than 75% of the world’s output.
Since World War 2 platinum mine production grew continuously in response to new applications being developed for the metals. A significant new use of platinum was in the petroleum industry, where platinum catalysts were introduced to increase the octane rating of petroleum and to manufacture important primary feedstocks for the growing plastics industry. This was followed in the 1960s by growing demand for platinum jewellery – given its purity, colour, prestige and value.
In the latter half of the 20th century, the platinum sector in South Africa was dominated by Gencor, JCI and Lonrho. Corporate actions eventually saw the mines in these groups housed under Implats, Amplats and Lonmin respectively, the majors in the sector, and responsible for producing up to 80% of the world’s PGM supplies.
The advent of black economic empowerment, and the use-it-or-lose-it approach to minerals rights (envisaged in the MPRDA) led to a shift in the sector, and the growth and rise of smaller platinum companies, including intense interest from foreign investors and operators alike. This legislation coincided with an upswing in PGM demand and prices from 2002 through to 2008, before a global economic depression heralded the end of the glory days in the platinum sector and shut many smaller operators down.

## Technology
The ores from the different ore bodies are processed in concentrators where a PGM concentrate is produced with a tailing by product. The PGM base metal concentrate product from the different concentrators processing the different ores are blended during the smelting phase to balance the sulphur content in the final matte product. Smelter operators also carry out toll smelting from third part concentrators. The smelter product is send to the Base metal refinery where the PGMs are separated from the Base Metals. Precious metal refinery is carried out on PGM concentrate from the Base metal refinery to split the PGMs into individual metal products.

Water analyses measurements for Anglo Platinum obtained from literature (Slatter et.al, 2009).
Mudd, G., 2010. Platinum group metals: a unique case study in the sustainability of mineral resources, in: The 4th International Platinum Conference, Platinum in Transition “Boom or Bust.”

Water share between MC and EC from Mudd (2010).
Mudd, G., 2010. Platinum group metals: a unique case study in the sustainability of mineral resources, in: The 4th International Platinum Conference, Platinum in Transition “Boom or Bust.”

## Parameters
- fraction, process water, to air: 0.15 dimensionless; name fraction_PW_to_air
  Literature value. In case when no industry/process specific data are available, default evaporation fraction value is used. This value is 15% and is based on literature (Statistics Canada, 2007 & Shaffer, K.H., 2008, Consumptive water use in the Great Lakes Basin, USGS & Shiklomanov, 2003, World Water Resources at the Beginning of the 21st Century) and has been approved by an expert.
- water used in primary activity: 253.8 m3; name totWaterPA; = surface_water+(potable_water/1000)+water_well_in_ground
  total water consumption including all the water sources

## Reference product
- platinum: 1 kg; By-product classification allocatable product; CPC 41330: Platinum, unwrought or in semi-manufactured forms, or in powder form; CAS 7440-06-4
  Platinum production volume, represents the geo mean of platinum production obtained from SD reports for Anglo, Lonmin and Implats. Then ithas been scaled down to represent 1 kg of Platinum as RP. (Anglo,2015),(Implats,2015),(Lonmin,2015). Platinum grade is 99.8%.
  production volume 126750 kg
    Annual production volume for the year of reference (2015) for platinum. 275500 for the whole PGMs group
  property price 20600 EUR2005
    Temporary price data. Calculated as 90% of purchasers price based on: 2004 price from USGS (2007) Mineral commodity summaries 2007. <http://minerals.usgs.gov/minerals/pubs/mcs/2007/mcs2007.pdf> [Accessed 25 May 2010]
  properties: carbon allocation 0 kg, carbon content 0, carbon content, fossil 0, carbon content, non-fossil 0, dry mass 1 kg, platinum content 1, water content 0, water in wet mass 0 kg, wet mass 1 kg

## Inputs from technosphere
- copper, cathode: -220 kg; name ByP_05; lognormal variance with pedigree 0.0007, pedigree (2,2,1,1,1)
  Values from 2015 SD reports for Anglo, Lonmin and Implats. (Anglo,2015),(Implats,2015),(Lonmin,2015) and scaled down to refer to 1kg of Platinum as RP.
  production volume
    Calculated from production volume of reference product using the relative outputs. Actual value from companies SD reports: 19076000
  property copper content 1; name ByP_05_Cu_content
  properties: dry mass 1 kg, price 3.57105 EUR2005, wet mass 1 kg
- diesel, burned in building machine: 51500 MJ; lognormal variance with pedigree 0.0027, pedigree (2,2,3,1,1)
  This account for Scope 1 emission from fuel use within the plant. Values from 2015 SD reports for Anglo Platinum , Northam and implats. Shares of fossil fuels between MC and ER obtained from Anglo SD 2015.
  properties: heating value, net 1 MJ
- electricity, medium voltage: 41100 kWh; lognormal variance with pedigree 0.0027, pedigree (2,2,3,1,1)
  Electricity requirements for the extraction and refinement of PGMs. Calculated on the average annual production and scaled down to 1 kg of Platinum produce. Values from 2015 SD reports for Anglo Platinum , Northam, Lonmin and implats. Shares of electricity between MC and ER obtained from Anglo SD 2015.
- gold: -0.0436 kg; name ByP_03; lognormal variance with pedigree 0.0007, pedigree (2,2,1,1,1)
  (same comment as for copper, cathode)
  production volume
    Calculated from production volume of reference product using the relative outputs. Actual value from companies SD reports: 3714.38
  property gold content 1; name ByP_03_Au_content
  properties: dry mass 1 kg, price 25128.4 EUR2005, wet mass 1 kg
- hard coal: 2920 kg; lognormal variance with pedigree 0.0027, pedigree (2,2,3,1,1)
  Coal requirements for extration and refinement of Platinum. Calculated on an average annual production and scaled down to 1 kg of Platinum produce. Values from 2015 SD reports for Anglo Platinum , Northam and implats. Shares of fossil fuels between MC and ER obtained from Anglo SD 2015.
  properties: carbon content, fossil 0.845, dry mass 0.94 kg, heating value, net 27.91 MJ, water content 0.0638298, wet mass 1 kg
  note on carbon content, fossil: C content 75-94% (specified in Tab 1.1, report 6, part VI). A mean content of 0.845 kg C/ kg dry hard coal was considered
  note on heating value, net: Based on the Characterization factor of Hard coal in the CED method
- inert waste: -10700 kg; name ByP_06; lognormal variance with pedigree 0.0007, pedigree (2,2,1,1,1)
  This represents PGM metallurgical slag. Values from 2015 SD reports for Anglo, Lonmin and Implats. (Anglo,2015),(Implats,2015),(Lonmin,2015) and scaled down to refer to 1kg of Platinum as RP.
  production volume
    Calculated from production volume of reference product using the relative outputs.
  property aluminium content 0.0284; name ByP_06_Al_content
  property calcium content 0.0289; name ByP_06_Ca_content
  property chromium content 0.0168; name ByP_06_Cr_content
  property cobalt content 0.000737; name ByP_06_Co_content
  property copper content 0.00172; name ByP_06_Cu_content
  property gold content 3.41e-7; name ByP_06_Au_content
  property iron content 0.2; name ByP_06_Fe_content
  property manganese content 0.205; name ByP_06_Mn_content
  property nickel content 0.00265; name ByP_06_Ni_content
  property palladium content 4.72e-6; name ByP_06_Pd_content
  property platinum content 7.83e-6; name ByP_06_Pt_content
  property rhodium content 1.23e-6; name ByP_06_Rh_content
  property silicon content 0.447; name ByP_06_Si_content
  property sulfur content 0.0689; name ByP_06_S_content
  properties: dry mass 1 kg, wet mass 1 kg
- lubricating oil: 4680 kg; name lub_oil; lognormal variance with pedigree 0.0027, pedigree (2,2,3,1,1)
  Values from 2015 SD reports for Anglo Platinum and implats. Shares of lubricants between MC and ER obtained Anglo SD 2015. Calculated value from companies annual reports and scaled down to refer 1 kg of PGMs concentrate. It accounts for lubricating oils and grease used within the plant. A density of 0.9 kg/L was used to convert volumes into mass. Usual range for lubricating oil and grease is 0,85/0,95 kg/m3.
  properties: carbon content, fossil 0.75, dry mass 1 kg, heating value, net 40.2 MJ, wet mass 1 kg
  note on carbon content, fossil: Lubricating oil is produced from diesel. C-content/dry mass of fats and oils considered 75%, from: ecoinvent v2.2 report, n 15a, pg 40
  note on heating value, net: Literature value, Source: IPCC 2006, 2006 IPCC Guidelines for National Greenhouse Gas Inventories, Prepared by the National Greenhouse Gas Inventories Programme, Eggleston H.S., Buendia L., Miwa K., Ngara T. and Tanabe K. (eds). Published: IGES, Japan
- nickel, class 1: -338 kg; name ByP_04; lognormal variance with pedigree 0.0007, pedigree (2,2,1,1,1)
  (same comment as for copper, cathode)
  production volume
    Calculated from production volume of reference product using the relative outputs. Actual value from companies SD reports: 45020000
  property nickel content 1; name ByP_04_Ni_content
  properties: dry mass 1 kg, price 12.0741 EUR2005, wet mass 1 kg
- non-ferrous metal smelter: 7.54717e-12 unit; = 1/(50*2650000000); lognormal variance with pedigree 0.172, pedigree (4,4,5,5,5)
  Value estimated from the annual production volume produced by the infrastructure (2650000 ton metal /year) and lifetime fo 50 years and scaled down to refer to 1 kg of platinum produce.
- palladium: -0.604 kg; name ByP_01; lognormal variance with pedigree 0.0007, pedigree (2,2,1,1,1)
  (same comment as for copper, cathode)
  production volume
    Calculated from production volume of reference product using the relative outputs. Actual value from companies SD reports: 77199.58
  property palladium content 1; name ByP_01_Pd_content
  properties: dry mass 1 kg, price 5640 EUR2005, wet mass 1 kg
- platinum group metal concentrate: 11300 kg; name PGM_concentrate; lognormal variance with pedigree 0.0027, pedigree (2,2,3,1,1)
  Includes concentrate send for toll refinery by third parties.Values from 2015 SD reports for Anglo, Lonmin and Implats.
  property carbon content, fossil 0; name PGM_concentrate_C_content_fossil
  property carbon content, non-fossil 0; name PGM_concentrate_C_content_non_fossil
  property copper content 0.0211; name PGM_concentrate_Cu_content
  property gold content 1.19e-6; name PGM_concentrate_Au_content
  property nickel content 0.0325; name PGM_concentrate_Ni_content
  property palladium content 5.8e-5; name PGM_concentrate_Pd_content
  property platinum content 9.61e-5; name PGM_concentrate_Pt_content
  property rhodium content 1.15e-5; name PGM_concentrate_Rh_content
  property water content 0; name PGM_concentrate_water_content
  property water in wet mass 0 kg; name PGM_concentrate_WWM
  properties: aluminium content 0.027, calcium content 0.0275, chromium content 0.016, cobalt content 0.0007, dry mass 1 kg, iron content 0.19, manganese content 0.195, silicon content 0.432, sulfur content 0.0655, wet mass 1 kg
- rhodium: -0.157 kg; name ByP_02; lognormal variance with pedigree 0.0007, pedigree (2,2,1,1,1)
  (same comment as for copper, cathode)
  production volume
    Calculated from production volume of reference product using the relative outputs. Actual value from companies SD reports: 22403.15
  property rhodium content 1; name ByP_02_Rh_content
  properties: dry mass 1 kg, price 23800 EUR2005, wet mass 1 kg
- tap water: 122000 kg; name potable_water; lognormal variance with pedigree 0.0027, pedigree (2,2,3,1,1)
  Values from 2015 SD reports for Anglo and implats. Shares for water between Mining and Concentration and Extraction and Refinery obtained from Mudd (2010). Mudd, G., 2010. Platinum group metals: a unique case study in the sustainability of mineral resources, in: The 4th International Platinum Conference, Platinum in Transition “Boom or Bust.”
  properties: carbon content, fossil 0.00178991, dry mass 0.000337476 kg, water content 2962.17, wet mass 1 kg
  note on carbon content, fossil: Bicarbonate content is 2.93 mol/m3. CO2 content is 0.1 mol/m3 (ecoinvent v2.2 report 8, Tab 93.1).

## Inputs from nature
- Water, river [natural resource, in water]: 89.9 m3; name surface_water; lognormal variance with pedigree 0.0027, pedigree (2,2,3,1,1)
  (same comment as for tap water)
- Water, well, in ground [natural resource, in water]: 41.9 m3; name water_well_in_ground; lognormal variance with pedigree 0.0027, pedigree (2,2,3,1,1)
  (same comment as for tap water)

## Emissions to nature
- Antimony ion [air, non-urban air or from high stacks]: 4.49e-5 kg; lognormal variance with pedigree 0.0067, pedigree (3,4,3,3,2)
  Emissions of Antymony to air have been calculated using companies reports in combination with the following reference: 2012, NIP Emissions Estimation Technique Manual for Mining, National Pollution Inventory, 1, Environmental Australia, 0 - Undefined. Online version: http://www.npi.gov.au
- Arsenic ion [air, non-urban air or from high stacks]: 3.49e-6 kg; lognormal variance with pedigree 0.0067, pedigree (3,4,3,3,2)
  Emissions of Arsenic to air have been calculated using companies reports in combination with the following reference: 2012, NIP Emissions Estimation Technique Manual for Mining, National Pollution Inventory, 1, Environmental Australia, 0 - Undefined. Online version: http://www.npi.gov.au
- Beryllium II [air, non-urban air or from high stacks]: 5.82e-7 kg; lognormal variance with pedigree 0.0067, pedigree (3,4,3,3,2)
  Emissions of Beryllium to air have been calculated using companies reports in combination with the following reference: 2012, NIP Emissions Estimation Technique Manual for Mining, National Pollution Inventory, 1, Environmental Australia, 0 - Undefined. Online version: http://www.npi.gov.au
- Boron [air, non-urban air or from high stacks]: 2.24e-6 kg; lognormal variance with pedigree 0.0067, pedigree (3,4,3,3,2)
  Emissions of Boron to air have been calculated using companies reports in combination with the following reference: 2012, NIP Emissions Estimation Technique Manual for Mining, National Pollution Inventory, 1, Environmental Australia, 0 - Undefined. Online version: http://www.npi.gov.au
- Cadmium II [air, non-urban air or from high stacks]: 2.46e-8 kg; lognormal variance with pedigree 0.0067, pedigree (3,4,3,3,2)
  Emissions of Cadmium to air have been calculated using companies reports in combination with the following reference: 2012, NIP Emissions Estimation Technique Manual for Mining, National Pollution Inventory, 1, Environmental Australia, 0 - Undefined. Online version: http://www.npi.gov.au
- Carbon dioxide, fossil [air, non-urban air or from high stacks]: 0.593 kg; lognormal variance with pedigree 0.0067, pedigree (3,4,3,3,2)
  Emissions of CO2 to air have been calculated using companies reports in combination with the following reference: 2012, NIP Emissions Estimation Technique Manual for Mining, National Pollution Inventory, 1, Environmental Australia, 0 - Undefined. Online version: http://www.npi.gov.au
- Chromium III [air, non-urban air or from high stacks]: 2.24e-5 kg; lognormal variance with pedigree 0.0067, pedigree (3,4,3,3,2)
  Emissions of Chromium to air have been calculated using companies reports in combination with the following reference: 2012, NIP Emissions Estimation Technique Manual for Mining, National Pollution Inventory, 1, Environmental Australia, 0 - Undefined. Online version: http://www.npi.gov.au
- Cobalt II [air, non-urban air or from high stacks]: 2.07e-5 kg; lognormal variance with pedigree 0.0067, pedigree (3,4,3,3,2)
  Emissions of Cobalt to air have been calculated using companies reports in combination with the following reference: 2012, NIP Emissions Estimation Technique Manual for Mining, National Pollution Inventory, 1, Environmental Australia, 0 - Undefined. Online version: http://www.npi.gov.au
- Copper ion [air, non-urban air or from high stacks]: 3.28e-5 kg; lognormal variance with pedigree 0.0067, pedigree (3,4,3,3,2)
  Emissions of Copper to air have been calculated using companies reports in combination with the following reference: 2012, NIP Emissions Estimation Technique Manual for Mining, National Pollution Inventory, 1, Environmental Australia, 0 - Undefined. Online version: http://www.npi.gov.au
- Dioxins, measured as 2,3,7,8-tetrachlorodibenzo-p-dioxin [air, non-urban air or from high stacks]: 5.41e-12 kg; lognormal variance with pedigree 0.0067, pedigree (3,4,3,3,2)
  Emissions of Dioxins to air have been calculated using companies reports in combination with the following reference: 2012, NIP Emissions Estimation Technique Manual for Mining, National Pollution Inventory, 1, Environmental Australia, 0 - Undefined. Online version: http://www.npi.gov.au
- Fluorine [air, non-urban air or from high stacks]: 0.000214 kg; lognormal variance with pedigree 0.0067, pedigree (3,4,3,3,2)
  Emissions of Fluorine to air have been calculated using companies reports in combination with the following reference: 2012, NIP Emissions Estimation Technique Manual for Mining, National Pollution Inventory, 1, Environmental Australia, 0 - Undefined. Online version: http://www.npi.gov.au
- Lead II [air, non-urban air or from high stacks]: 2e-5 kg; lognormal variance with pedigree 0.0067, pedigree (3,4,3,3,2)
  Emissions of Lead to air have been calculated using companies reports in combination with the following reference: 2012, NIP Emissions Estimation Technique Manual for Mining, National Pollution Inventory, 1, Environmental Australia, 0 - Undefined. Online version: http://www.npi.gov.au
- Manganese II [air, non-urban air or from high stacks]: 0.000213 kg; lognormal variance with pedigree 0.0067, pedigree (3,4,3,3,2)
  Emissions of Manganese to air have been calculated using companies reports in combination with the following reference: 2012, NIP Emissions Estimation Technique Manual for Mining, National Pollution Inventory, 1, Environmental Australia, 0 - Undefined. Online version: http://www.npi.gov.au
- Mercury II [air, non-urban air or from high stacks]: 1.12e-8 kg; lognormal variance with pedigree 0.0067, pedigree (3,4,3,3,2)
  Emissions of Mercury to air have been calculated using companies reports in combination with the following reference: 2012, NIP Emissions Estimation Technique Manual for Mining, National Pollution Inventory, 1, Environmental Australia, 0 - Undefined. Online version: http://www.npi.gov.au
- NMVOC, non-methane volatile organic compounds [air, non-urban air or from high stacks]: 0.000108 kg; lognormal variance with pedigree 0.0067, pedigree (3,4,3,3,2)
  Emissions of NMVOC to air have been calculated using companies reports in combination with the following reference: 2012, NIP Emissions Estimation Technique Manual for Mining, National Pollution Inventory, 1, Environmental Australia, 0 - Undefined. Online version: http://www.npi.gov.au
- Nickel II [air, non-urban air or from high stacks]: 3.47e-5 kg; lognormal variance with pedigree 0.0067, pedigree (3,4,3,3,2)
  Emissions of Nickel to air have been calculated using companies reports in combination with the following reference: 2012, NIP Emissions Estimation Technique Manual for Mining, National Pollution Inventory, 1, Environmental Australia, 0 - Undefined. Online version: http://www.npi.gov.au
- Nitrogen oxides [air, non-urban air or from high stacks]: 7.95e-5 kg; lognormal variance with pedigree 0.0027, pedigree (2,2,3,1,1)
  (same comment as for copper, cathode)
- Particulate Matter, < 2.5 um [air, non-urban air or from high stacks]: 0.011 kg; lognormal variance with pedigree 0.0067, pedigree (3,4,3,3,2)
  Emissions of PM < 2.5 to air have been calculated using companies reports in combination with the following reference: 2012, NIP Emissions Estimation Technique Manual for Mining, National Pollution Inventory, 1, Environmental Australia, 0 - Undefined. Online version: http://www.npi.gov.au
- Particulate Matter, > 10 um [air, non-urban air or from high stacks]: 0.114 kg; lognormal variance with pedigree 0.0067, pedigree (3,4,3,3,2)
  Emissions of PM > 10 to air have been calculated using companies reports in combination with the following reference: 2012, NIP Emissions Estimation Technique Manual for Mining, National Pollution Inventory, 1, Environmental Australia, 0 - Undefined. Online version: http://www.npi.gov.au
- Particulate Matter, > 2.5 um and < 10um [air, non-urban air or from high stacks]: 0.0994 kg; lognormal variance with pedigree 0.0027, pedigree (2,2,3,1,1)
  (same comment as for copper, cathode)
- Selenium IV [air, non-urban air or from high stacks]: 1.12e-8 kg; lognormal variance with pedigree 0.0067, pedigree (3,4,3,3,2)
  Emissions of Selenium to air have been calculated using companies reports in combination with the following reference: 2012, NIP Emissions Estimation Technique Manual for Mining, National Pollution Inventory, 1, Environmental Australia, 0 - Undefined. Online version: http://www.npi.gov.au
- Sulfur dioxide [air, non-urban air or from high stacks]: 0.412 kg; lognormal variance with pedigree 0.0067, pedigree (3,4,3,3,2)
  Emissions of SO2 to air have been calculated using companies reports in combination with the following reference: 2012, NIP Emissions Estimation Technique Manual for Mining, National Pollution Inventory, 1, Environmental Australia, 0 - Undefined. Online version: http://www.npi.gov.au
- Sulfur oxides [air, unspecified]: 270 kg; lognormal variance with pedigree 0.0027, pedigree (2,2,3,1,1)
  (same comment as for copper, cathode)
- Tin ion [air, non-urban air or from high stacks]: 3.54e-6 kg; lognormal variance with pedigree 0.0067, pedigree (3,4,3,3,2)
  Emissions of Tin to air have been calculated using companies reports in combination with the following reference: 2012, NIP Emissions Estimation Technique Manual for Mining, National Pollution Inventory, 1, Environmental Australia, 0 - Undefined. Online version: http://www.npi.gov.au
- Water [air, unspecified]: 38.07 m3; name water_to_air_unspecified; = totWaterPA*fraction_PW_to_air; lognormal variance with pedigree 0.0027, pedigree (2,2,3,1,1)
  water emission to air
- Zinc II [air, non-urban air or from high stacks]: 9.73e-5 kg; lognormal variance with pedigree 0.0067, pedigree (3,4,3,3,2)
  Emissions of Zinc to air have been calculated using companies reports in combination with the following reference: 2012, NIP Emissions Estimation Technique Manual for Mining, National Pollution Inventory, 1, Environmental Australia, 0 - Undefined. Online version: http://www.npi.gov.au
- Oils, unspecified [soil, industrial]: 3510 kg; = lub_oil*0.75; lognormal variance with pedigree 0.0027, pedigree (2,2,3,1,1)
  Emission to soil from the use of Luricating and hydraulic oils. It has been estimated that approximaly 70-80 % of hydraulic oils leave the system due to leakage, spill, line and hose breakage and fitting failures. www.machinerylubrication.com
- Aluminium III [water, surface water]: 0.159 kg; lognormal variance with pedigree 0.0067, pedigree (3,4,3,3,2)
  Emissions of Aluminium to water have been calculated using companies reports in combination with the following reference 2016, IPCC, Draf Document of Best Available Techinques for Management of Tailings and Waste Rock in Mining Activities 1, EU, 0 udefined, retrived at http://susproc.jrc.ec.europa.eu/activities/waste/documents/MWEI_BREF_draft.pdf
- Arsenic ion [water, surface water]: 0.00542 kg; lognormal variance with pedigree 0.0067, pedigree (3,4,3,3,2)
  Emissions of Arsenic, ion to water have been calculated using companies reports in combination with the following reference 2016, IPCC, Draf Document of Best Available Techinques for Management of Tailings and Waste Rock in Mining Activities 1, EU, 0 udefined, retrived at http://susproc.jrc.ec.europa.eu/activities/waste/documents/MWEI_BREF_draft.pdf
- BOD5, Biological Oxygen Demand [water, surface water]: 0.0129 kg; lognormal variance with pedigree 0.0067, pedigree (3,4,3,3,2)
  Emissions of BOD5 to water have been calculated using companies reports in combination with the following reference 2016, IPCC, Draf Document of Best Available Techinques for Management of Tailings and Waste Rock in Mining Activities 1, EU, 0 udefined, retrived at http://susproc.jrc.ec.europa.eu/activities/waste/documents/MWEI_BREF_draft.pdf
- COD, Chemical Oxygen Demand [water, surface water]: 0.0195 kg; lognormal variance with pedigree 0.0067, pedigree (3,4,3,3,2)
  Emissions of COD to water have been calculated using companies reports in combination with the following reference 2016, IPCC, Draf Document of Best Available Techinques for Management of Tailings and Waste Rock in Mining Activities 1, EU, 0 udefined, retrived at http://susproc.jrc.ec.europa.eu/activities/waste/documents/MWEI_BREF_draft.pdf
- Cadmium II [water, surface water]: 0.000582 kg; lognormal variance with pedigree 0.0067, pedigree (3,4,3,3,2)
  Emissions of Cadmiuim, ion to water have been calculated using companies reports in combination with the following reference 2016, IPCC, Draf Document of Best Available Techinques for Management of Tailings and Waste Rock in Mining Activities 1, EU, 0 udefined, retrived at http://susproc.jrc.ec.europa.eu/activities/waste/documents/MWEI_BREF_draft.pdf
- Calcium II [water, surface water]: 1.26 kg; lognormal variance with pedigree 0.0027, pedigree (2,2,3,1,1)
  Water analyses measurements for Anglo Platinum obtained from literature (Slatter et.al, 2009). Slatter, KA and Plint, ND and Cole, M and Dilsook, V and De Vaux, D and Palm, N and Oostendorp, B., 2009. Water management in Anglo Platinum process operations: effects of water quality on process operations, in: International Mine Water Conference. pp. 19-23.
- Chlorine [water, surface water]: 0.865 kg; lognormal variance with pedigree 0.0027, pedigree (2,2,3,1,1)
  (same comment as for Calcium II)
- Chromium III [water, surface water]: 0.00101 kg; lognormal variance with pedigree 0.0086, pedigree (3,4,3,5,2)
  Emissions of Chromiuim, ion to water have been calculated using companies reports in combination with the following reference 2016, IPCC, Draf Document of Best Available Techinques for Management of Tailings and Waste Rock in Mining Activities 1, EU, 0 udefined, retrived at http://susproc.jrc.ec.europa.eu/activities/waste/documents/MWEI_BREF_draft.pdf
- Cobalt II [water, surface water]: 0.00144 kg; lognormal variance with pedigree 0.0067, pedigree (3,4,3,3,2)
  Emissions of Cobalt to water have been calculated using companies reports in combination with the following reference 2016, IPCC, Draf Document of Best Available Techinques for Management of Tailings and Waste Rock in Mining Activities 1, EU, 0 udefined, retrived at http://susproc.jrc.ec.europa.eu/activities/waste/documents/MWEI_BREF_draft.pdf
- Copper ion [water, surface water]: 0.0145 kg; lognormal variance with pedigree 0.0067, pedigree (3,4,3,3,2)
  Emissions of Copper, ion to water have been calculated using companies reports in combination with the following reference 2016, IPCC, Draf Document of Best Available Techinques for Management of Tailings and Waste Rock in Mining Activities 1, EU, 0 udefined, retrived at http://susproc.jrc.ec.europa.eu/activities/waste/documents/MWEI_BREF_draft.pdf
- Cyanide [water, surface water]: 0.0127 kg; lognormal variance with pedigree 0.0067, pedigree (3,4,3,3,2)
  Emissions of Cyanide to water have been calculated using companies reports in combination with the following reference 2016, IPCC, Draf Document of Best Available Techinques for Management of Tailings and Waste Rock in Mining Activities 1, EU, 0 udefined, retrived at http://susproc.jrc.ec.europa.eu/activities/waste/documents/MWEI_BREF_draft.pdf
- DOC, Dissolved Organic Carbon [water, surface water]: 0.00762 kg; lognormal variance with pedigree 0.0067, pedigree (3,4,3,3,2)
  Emissions of DOC to water have been calculated using companies reports in combination with the following reference 2016, IPCC, Draf Document of Best Available Techinques for Management of Tailings and Waste Rock in Mining Activities 1, EU, 0 udefined, retrived at http://susproc.jrc.ec.europa.eu/activities/waste/documents/MWEI_BREF_draft.pdf
- Dissolved solids [water, surface water]: 0.00951 kg; lognormal variance with pedigree 0.0027, pedigree (2,2,3,1,1)
  (same comment as for Calcium II)
- Iron ion [water, surface water]: 0.535 kg; lognormal variance with pedigree 0.0067, pedigree (3,4,3,3,2)
  Emissions of Iron, ion to water have been calculated using companies reports in combination with the following reference 2016, IPCC, Draf Document of Best Available Techinques for Management of Tailings and Waste Rock in Mining Activities 1, EU, 0 udefined, retrived at http://susproc.jrc.ec.europa.eu/activities/waste/documents/MWEI_BREF_draft.pdf
- Lead II [water, surface water]: 0.00515 kg; lognormal variance with pedigree 0.0067, pedigree (3,4,3,3,2)
  Emissions of Lead to water have been calculated using companies reports in combination with the following reference 2016, IPCC, Draf Document of Best Available Techinques for Management of Tailings and Waste Rock in Mining Activities 1, EU, 0 udefined, retrived at http://susproc.jrc.ec.europa.eu/activities/waste/documents/MWEI_BREF_draft.pdf
- Manganese II [water, surface water]: 0.0454 kg; lognormal variance with pedigree 0.0067, pedigree (3,4,3,3,2)
  Emissions of Manganese to water have been calculated using companies reports in combination with the following reference 2016, IPCC, Draf Document of Best Available Techinques for Management of Tailings and Waste Rock in Mining Activities 1, EU, 0 udefined, retrived at http://susproc.jrc.ec.europa.eu/activities/waste/documents/MWEI_BREF_draft.pdf
- Mercury II [water, surface water]: 4.94e-5 kg; lognormal variance with pedigree 0.0067, pedigree (3,4,3,3,2)
  Emissions of Mercury to water have been calculated using companies reports in combination with the following reference 2016, IPCC, Draf Document of Best Available Techinques for Management of Tailings and Waste Rock in Mining Activities 1, EU, 0 udefined, retrived at http://susproc.jrc.ec.europa.eu/activities/waste/documents/MWEI_BREF_draft.pdf
- Nickel II [water, surface water]: 0.0447 kg; lognormal variance with pedigree 0.0067, pedigree (3,4,3,3,2)
  Emissions of Nickel to water have been calculated using companies reports in combination with the following reference 2016, IPCC, Draf Document of Best Available Techinques for Management of Tailings and Waste Rock in Mining Activities 1, EU, 0 udefined, retrived at http://susproc.jrc.ec.europa.eu/activities/waste/documents/MWEI_BREF_draft.pdf
- Nitrogen, organic bound [water, surface water]: 0.0419 kg; lognormal variance with pedigree 0.0027, pedigree (2,2,3,1,1)
  (same comment as for Calcium II)
- Sodium [water, unspecified]: 0.556 kg; lognormal variance with pedigree 0.0027, pedigree (2,2,3,1,1)
  (same comment as for Calcium II)
- Sulfate [water, surface water]: 4.34 kg; lognormal variance with pedigree 0.0027, pedigree (2,2,3,1,1)
  (same comment as for Calcium II)
- TOC, Total Organic Carbon [water, surface water]: 0.00762 kg; lognormal variance with pedigree 0.0086, pedigree (3,4,3,5,2)
  Emissions of TOC to water have been calculated using companies reports in combination with the following reference 2016, IPCC, Draf Document of Best Available Techinques for Management of Tailings and Waste Rock in Mining Activities 1, EU, 0 udefined, retrived at http://susproc.jrc.ec.europa.eu/activities/waste/documents/MWEI_BREF_draft.pdf
- Tin ion [water, surface water]: 4.5e-6 kg; lognormal variance with pedigree 0.0067, pedigree (3,4,3,3,2)
  Emissions of Tin, ion to water have been calculated using companies reports in combination with the following reference 2016, IPCC, Draf Document of Best Available Techinques for Management of Tailings and Waste Rock in Mining Activities 1, EU, 0 udefined, retrived at http://susproc.jrc.ec.europa.eu/activities/waste/documents/MWEI_BREF_draft.pdf
- Water [water, surface water]: 215.73 m3; name water_to_water_unspecified; = totWaterPA*(1-fraction_PW_to_air); lognormal variance with pedigree 0.0027, pedigree (2,2,3,1,1)
  water emission to water bodies
- Zinc II [water, surface water]: 0.139 kg; lognormal variance with pedigree 0.0067, pedigree (3,4,3,3,2)
  Emissions of Zinc, ion to water have been calculated using companies reports in combination with the following reference 2016, IPCC, Draf Document of Best Available Techinques for Management of Tailings and Waste Rock in Mining Activities 1, EU, 0 udefined, retrived at http://susproc.jrc.ec.europa.eu/activities/waste/documents/MWEI_BREF_draft.pdf

## Sampling procedure
Extrapolation of data from Companies Sustainability Reports, Chamber of Mines and relevant literature. (Anglo,2015),(Implats,2015),(Northam, 2015), (Lonmin,2015).
Refinery recovery (Jones,1999)
Water analyses measurements for Anglo Platinum obtained from literature (Slatter et.al, 2009). Slatter, KA and Plint, ND and Cole, M and Dilsook, V and De Vaux, D and Palm, N and Oostendorp, B., 2009. Water management in Anglo Platinum process operations: effects of water quality on process operations, in: International Mine Water Conference. pp. 19-23.

Water share between MC and EC from Mudd (2010).
Mudd, G., 2010. Platinum group metals: a unique case study in the sustainability of mineral resources, in: The 4th International Platinum Conference, Platinum in Transition “Boom or Bust.”

Air emission where missing from companies reports were calculated using companies reports in combination with the following reference:. 2012, NIP Emissions Estimation Technique Manual for Mining, National Pollution Inventory, 1, Environmental Australia, 0 - Undefined. Online version: <http://www.npi.gov.au>

Water Emission where missing from companies reports where calculated using companies reports in combination with the following reference: 2016, IPCC, Draf Document of Best Available Techinques for Management of Tailings and Waste Rock in Mining Activities 1, EU, 0 udefined, retrived at <http://susproc.jrc.ec.europa.eu/activities/waste/documents/MWEI_BREF_draft.pdf>
