# containerboard production, linerboard, kraftliner

Dataset: EcoSpold 2, unit process
Geography: RER
Time period: 2018-01-01 to 2022-12-31
Technology level: current
Classification: ISIC rev.4 ecoinvent: 1702:Manufacture of corrugated paper and paperboard and of containers of paper a
Synonyms: containerboard; linerboard
Scenario: Business-as-Usual
System model: Substitution, consequential, long-term
Share of production covered: 85 %
Generated by: Michael Sturges
Published in: FEFCO Corrugated Packaging 2018
Database: ecoinvent
isCopyrightProtected: true

## General comment
This dataset represents the production of kraftliner from virgin wood/ sulfate pulp. Kraftliner is commonly produced from virgin material, while testliner is made from recycled fibers. Nonetheless also Kraftliner can partly be made from recycled fiber input. Both products are used interchangeably as bottom and top layers surrounding the mid layer of “medium” in the production of corrugated board. Data represent the industry average in 2018.
Data for the production of Kraftliner were provided by the industry association of corrugated packaging manufacturers in Europe (The European Federation of Corrugated Board Manufacturers, FEFCO). The data for Semichemical Fluting and Kraftliner jointly represent ca. 85% of the total annual production of corrugated base papers from primary fibres in Europe. The data for Semichemical Fluting and Kraftliner also jointly represent ca. 90% of the total consumption of these grades for corrugated board production in Europe. Primary data were provided by large mills in Austria, Finland, France, Germany, Portugal, Poland, and Sweden. Together these mills produced 5 438 000 tonnes of paper products (not only semichemical fluting) in 2017. Thereby each mill has a production volume of about 94 000 to 1 128 000 tonnes net saleable paper product (FEFCO, 2018.). FEFCO. 2018. European Database for Corrugated Board Life Cycle Studies 2018. Reference(s): https://www.fefco.org/sites/default/files/documents/LCA%20Report%202019_revised_%20p%2037.pdf, accessed September 2022.
In FEFCO 2018 fuel consumption and the related emission to air include only steam and net electricity used on site. Sold electricity is not reported as a sold product and the associated input and output data are not included in the inventory. The fuel consumption and emissions to air associated with the total heat production and the net electricity used on site were allocated to the paper production.
The following air emissions were reported in the study: CO2 (fossil and biogenic), CO, NOx (as NO2), SOx (as SO2), TRS (H2S as S), Dust.
For a more complete air emission profile for Kraftliner production, however, additional air emissions (beyond the ones listed above) were added for the combustion of the external fuels and internal using LCI datasets for combustion of different fuels as proxy. The air emissions were calculated based on the mix of the external and internal fuels in the study and more information about the fuel mix and the proxy are provided under "Extrapolations". No proxy was available for the combustion of black liquor. Emissions from this internal energy generation process are therefore only reflected in the key emission factors provided by the industry.
The production volume is valid for the year 2018. Inventory data were collected for the year 2018.

## Included activities start
The process for the production of kraftliner starts with the transportation of wood and wood chips to the mill gate.

## Included activities end
The process ends with the production of kraftliner. Processes include chipping, screening of chips, cooking to pulp for (kraft cooking process).

## Geography
Data for main producers in Europe (Austria, Finland, France, Germany, Portugal, Poland, and Sweden).

## Technology
Average of present used technology
The kraft cooking process is a highly alkaline cooking process with caustic soda and sodium sulphide as active cooking chemicals with a pulp yield of around 55%. The pulp produced is defiberized in refiners, screened and washed before being sent to the paper mill. The stock passes through one or two head boxes onto the paper machine. Kraftliner is normally a two ply product and therefore requires a paper machine with two head boxes and normally also two wires.

## Reference product
- containerboard, linerboard: 1 kg; name linerboardAmount; By-product classification allocatable product; CPC 32151: Corrugated paper and paperboard
  production volume 5.07792e9 kg
    Calculated value corss-checked with industry information. Calculated by splitting the total shipment of corrugated packaging materials in Europe in 2018 as reported by FEFCO (2018) (2.43*10^10 kg) according to the reported shares of the consumption of testliner, kraftliner, other recycled liner, semi-chemical fluting and wellentsoff (=recycled fluting), respectively. The sum of shares was scaled to sum up to 100%. Reference(s): FEFCO. 2018. Annual Statistics 2018, accessible online at https://www.fefco.org/sites/default/files/documents/Fefco_AnnualEvaluation_2018.pdf, last accessed 11.05.2022
  property price 0.598 EUR2005
    Export prices for the World+ according to: http://faostat.fao.org/site/626/DesktopDefault.aspx?PageID=626#ancor downloaded 28 April 2009; calculated as export value divided by export volume.
  properties: carbon allocation 0.425926 kg, carbon content 0.46, carbon content, fossil 0, carbon content, non-fossil 0.46, dry mass 0.925926 kg, heating value, net 15.92 MJ, water content 0.08, water in wet mass 0.0740741 kg, wet mass 1 kg

## Inputs from technosphere
- alkylketene dimer sizing agent, for paper production: 0.000707 kg; lognormal variance with pedigree 0.0014, pedigree (1,3,2,1,1)
  FEFCO2018. Reported as sizing agents.
  properties: carbon content, non-fossil 0.538229, dry mass 1 kg, heating value, net 16.31 MJ, wet mass 1 kg
- aluminium sulfate, powder: 0.00302 kg; lognormal variance with pedigree 0.0014, pedigree (1,3,2,1,1)
  FEFCO 2018. Proxy for alum Al2(SO4)3.
  properties: dry mass 1 kg, wet mass 1 kg
- ammonia, anhydrous, liquid: 0.000119 kg; lognormal variance with pedigree 0.0014, pedigree (1,3,2,1,1)
  FEFCO 2018. Reported as NH3
  properties: dry mass 1 kg, wet mass 1 kg
- ash from paper production sludge: -0.0172004, -0.000449608 kg (2 suppliers, which the file names only by identifier); sum of these -0.01765 kg; lognormal variance with pedigree 0.0014, pedigree (1,3,2,1,1)
  Reported by FEFCO (2018) as residue, inorganic ashes, 80 % dry content. Includes coal and lignite ashes.
  production volume
    Calculated from production volume of reference flow.
  properties: carbon content, non-fossil 0.0092, dry mass 0.8 kg, water content 0.25, wet mass 1 kg
- calcium carbonate, precipitated: 0.00482 kg; lognormal variance with pedigree 0.0014, pedigree (1,3,2,1,1)
  FEFCO 2018. Reported as CaCO3
  properties: carbon content, fossil 0.120003, dry mass 1 kg, wet mass 1 kg
- carbon dioxide, liquid: 0.00275 kg; lognormal variance with pedigree 0.0014, pedigree (1,3,2,1,1)
  FEFCO 2018
  properties: carbon content, fossil 0.272727, dry mass 1 kg, heating value, net 8.27 MJ, wet mass 1 kg
- chemical, organic: 0.000825 kg; lognormal variance with pedigree 0.002, pedigree (2,3,2,1,1)
  FEFCO 2018. Reported as colorants.
  properties: carbon content, fossil 0.628, dry mass 1 kg, heating value, net 19.03 MJ, wet mass 1 kg
- core board: 0.001664 kg; lognormal variance with pedigree 0.0014, pedigree (1,3,2,1,1)
  FEFCO 2018. Reported as paper consumption for corrugated board production. Cores (1.6 kg) and core plugs (0,064 kg) summed. Both values for cores and core plugs are labeled as "limited data available" in FEFCO 2018.
  properties: carbon content, non-fossil 0.430314, dry mass 0.945 kg, heating value, net 12.19 MJ, water content 0.0582011, wet mass 1 kg
- corrugated board box: 0.00019 kg; lognormal variance with pedigree 0.0014, pedigree (1,3,2,1,1)
  FEFCO 2018. Proxy for paper and board for packaging
  properties: carbon content, fossil 0.00365437, carbon content, non-fossil 0.450248, dry mass 0.945 kg, heating value, net 12.86 MJ, water content 0.0582011, wet mass 1 kg
- diesel, low-sulfur: 0.000514019 kg; lognormal variance with pedigree 0.0095, pedigree (2,2,2,1,3)
  Data provided by FEFCO 2018, indicated in energy content and given as 0.022 GJ/t Calculation into mass/volume was done by using the following conversion factor: Diesel MJ/kg 42.8. Based on literature, page 16, Report6, part 4. Source: https://ecoinvent.org/wp-content/uploads/2021/09/LHV_fuels.xlsx
  Uncertainty: Uncertainty accounts for both the uncertainty associated with the fuel consumption value reported by FEFCO and the lower heating value used to convert the exchange value to a mass basis.
  properties: carbon content, fossil 0.865, dry mass 1 kg, heating value, net 42.8 MJ, wet mass 1 kg
- dithiocarbamate-compound: 4.95e-5 kg; lognormal variance with pedigree 0.0094, pedigree (1,3,2,1,3)
  FEFCO 2018. Reported as biocide. Assumed equally split between dithiocarbamate and triazine-compound
  properties: carbon content, fossil 0.179339, dry mass 1 kg, wet mass 1 kg
- electricity, medium voltage: 0.266111 kWh; lognormal variance with pedigree 0.0014, pedigree (1,3,2,1,1)
  FEFCO 2018. Reported as bought electricity
- ethoxylated alcohol (AE3): 0.000205 kg; lognormal variance with pedigree 0.0014, pedigree (1,3,2,1,1)
  FEFCO 2018. Proxy for defoamer, unspecified.
  properties: carbon content, fossil 0.207952, carbon content, non-fossil 0.485221, dry mass 1 kg, heating value, net 21 MJ, wet mass 1 kg
- hard coal: 0.0139018 kg; lognormal variance with pedigree 0.0095, pedigree (2,2,2,1,3)
  Data provided by FEFCO 2018, indicated in energy content and given as 0.388 GJ/t . Calculation into mass/volume was done by using the following conversion factor: Hard coal: MJ/kg 27.91. Based on the Characterization factor of Hard coal in the CED method. Source: https://ecoinvent.org/wp-content/uploads/2021/09/LHV_fuels.xlsx
  properties: carbon content, fossil 0.845, dry mass 0.94 kg, heating value, net 27.91 MJ, water content 0.0638298, wet mass 1 kg
- heavy fuel oil: 0.00407767 kg; lognormal variance with pedigree 0.0095, pedigree (2,2,2,1,3)
  Data provided by FEFCO 2018, indicated in energy content and given as 0.168 GJ/t. Calculation into mass/volume was done by using the following conversion factor: Heavy fuel oil: MJ/kg 41.2. Based on literature, page 21, Report6, part 4. Source: https://ecoinvent.org/wp-content/uploads/2021/09/LHV_fuels.xlsx
  Uncertainty: Uncertainty accounts for both the uncertainty associated with the fuel consumption value reported by FEFCO and the lower heating value used to convert the exchange value to a mass basis.
  properties: carbon content, fossil 0.849, dry mass 1 kg, heating value, net 41.2 MJ, wet mass 1 kg
- hydrogen peroxide, without water, in 50% solution state: 0.00249 kg; lognormal variance with pedigree 0.0014, pedigree (1,3,2,1,1)
  FEFCO 2018
  properties: dry mass 1 kg, heating value, net 7.13 MJ, wet mass 1 kg
- kaolin: 0.00823 kg; lognormal variance with pedigree 0.0014, pedigree (1,3,2,1,1)
  FEFCO 2018. Proxy for Fillers
  properties: dry mass 1 kg, wet mass 1 kg
- light fuel oil: 0.00185446 kg; lognormal variance with pedigree 0.0095, pedigree (2,2,2,1,3)
  Data provided by FEFCO 2018, indicated in energy content and given as 0.079 GJ/t.Calculation into mass/volume was done by using the following conversion factor: Light fuel oil: MJ/kg 42.6 Based on literature, page 18, Report6, part 4. Source: https://ecoinvent.org/wp-content/uploads/2021/09/LHV_fuels.xlsx
  Uncertainty: Uncertainty accounts for both the uncertainty associated with the fuel consumption value reported by FEFCO and the lower heating value used to convert the exchange value to a mass basis.
  properties: carbon content, fossil 0.862, dry mass 1 kg, heating value, net 42.6 MJ, wet mass 1 kg
- limestone residue: -0.008206 kg; name wasteCalciumCarbonateAmount; lognormal variance with pedigree 0.0014, pedigree (1,3,2,1,1)
  Reported by FEFCO (2018) as "Calcium carbonate" 75% dry content
  production volume
    Calculated from production volume of reference flow.
  properties: carbon content, fossil 0.120005, dry mass 0.75 kg, water content 0.333333, wet mass 1 kg
- liquefied petroleum gas: 0.00229602, 1.16771e-5 kg (2 suppliers, which the file names only by identifier); sum of these 0.00230769 kg; lognormal variance with pedigree 0.0095, pedigree (2,2,2,1,3)
  FEFCO 2018. Reported as 0.105 GJ/t. Converted to kg using the lower heating value (45.50 MJ/kg). The LHV represents an indicative value. Reference: Fuels - Higher and Lower Calorific Values, available at: https://www.engineeringtoolbox.com/fuels-higher-calorific-values-d_169.html
  properties: carbon content, fossil 0.821863, dry mass 1 kg, heating value, net 45.5 MJ, wet mass 1 kg
- lubricating oil: 7e-5 kg; lognormal variance with pedigree 0.0014, pedigree (1,3,2,1,1)
  FEFCO 2018. Reported as lubricants
  properties: carbon content, fossil 0.75, dry mass 1 kg, heating value, net 40.2 MJ, wet mass 1 kg
- maize starch: 0.0064 kg; lognormal variance with pedigree 0.002, pedigree (2,3,2,1,1)
  FEFCO 2018. Proxy for corn starch (2.48 kg) and half of "starch, modified" (3.57 kg), and "wheat starch" (4.27 kg). Other half of latter two starches modeled as potato starch.
  properties: carbon content, non-fossil 0.46, dry mass 0.86 kg, heating value, net 11.64 MJ, water content 0.162791, wet mass 1 kg
- municipal solid waste: -0.01728 kg; name mswAmount; lognormal variance with pedigree 0.0014, pedigree (1,3,2,1,1)
  Reported by FEFCO (2018) as "residue, rejects, paper-related" (5.76 kg), representing paper clips, tags, adhesive labels, fibres etc. and "residue, rejects, other" (11.52 kg), representing e.g. glass, sand, plastics. Dry content 50%
  production volume
    Calculated from production volume of reference product using the relative outputs.
  properties: carbon content, fossil 0.171549, carbon content, non-fossil 0.261655, dry mass 0.5 kg, heating value, net 11.74 MJ, water content 1, wet mass 1 kg
- natural gas, high pressure: 0.000183144, 0.0255604 m3 (2 suppliers, which the file names only by identifier); sum of these 0.0257436 m3; lognormal variance with pedigree 0.0095, pedigree (2,2,2,1,3)
  Data provided by FEFCO 2018, indicated in energy content and given as 1.004 GJ/t.Calculation into mass/volume was done by using the following conversion factor: 39 MJ/m3. Literature value, Source: United Nations Statistics Division (2018) International Recommendations for Energy Statistics (IRES). Available at: http://unstats.un.org/unsd/statcom/doc11/BG-IRES.pdf.
  properties: carbon content, fossil 0.75, dry mass 0.84 kg, heating value, net 36 MJ, wet mass 0.84 kg
  note on heating value, net: Literature value, Source: Christoph Meili;Niels Jungbluth;Maresa Bussa (2021) Life cycle inventories of crude oil and natural gas extraction. ESU-services Ltd. commissioned by BAFU & VSG, Schaffhausen, Switzerland, http://esu-services.ch/data/public-lci-reports/
- oxygen, liquid: 0.00156 kg; lognormal variance with pedigree 0.0014, pedigree (1,3,2,1,1)
  FEFCO 2018
  properties: dry mass 1 kg, wet mass 1 kg
- paper mill, integrated: 5.43478e-11 unit; = 1 / 50 / 368000; lognormal variance with pedigree 0.4686, pedigree (4,3,5,1,5)
  Estimated value with lifetime (50 years) and yearly production (368 kt) of underlying ecoinvent process (integrated paper mill).
- peat: 0.0005 kg; lognormal variance with pedigree 0.01, pedigree (2,3,2,1,3)
  FEFCO 2018. Reported as 0.005 GJ /ton net saleable product. converted with a LHV of 10 MJ/kg. LHV represents an indicative value. Reference: Nature and Management of Tropical Peat Soils, FAO Soils Bulletin 59, available at: http://www.fao.org/3/x5872e/x5872e00.htm#Contents
  Uncertainty: Uncertainty accounts for both the uncertainty associated with the fuel consumption value reported by FEFCO and the lower heating value used to convert the exchange value to a mass basis.
  properties: carbon content, fossil 0.59, dry mass 0.42 kg, heating value, net 10 MJ, water content 1.38095, wet mass 1 kg
- pitch despergents, in paper production: 7.8e-5 kg; lognormal variance with pedigree 0.0014, pedigree (1,3,2,1,1)
  FEFCO 2018
  properties: carbon content, fossil 0.290994, dry mass 1 kg, heating value, net 8.82 MJ, wet mass 1 kg
- potato starch: 0.00491 kg; lognormal variance with pedigree 0.002, pedigree (2,3,2,1,1)
  FEFCO 2018. Proxy for potato starch (0.99 kg) and half of "starch, modified" (3.57 kg), and "wheat starch" (4.27 kg). Other half of latter two starches modeled as maize starch.
  properties: carbon content, non-fossil 0.46, dry mass 0.8 kg, heating value, net 10.66 MJ, water content 0.25, wet mass 1 kg
- pulpwood, hardwood, measured as solid wood under bark: 1.1001e-5 m3; = 0.14*0.049004873090884*1000/623.644444444444; lognormal variance with pedigree 0.0014, pedigree (1,3,2,1,1)
  Reported as 0.14 bone dry tonnes of HW logs. Converted to m3 using the DM property. The split of the different HW inputs is based on the market shares for pulpwood, hardwood, measured as solid wood under bark
  properties: basic wood density 563.2, carbon content, non-fossil 0.494, dry mass 623.644 kg, heating value, net 6071.3 MJ, water content 0.8, wet mass 1122.56 kg
- pulpwood, hardwood, measured as solid wood under bark: 0.000119299 m3; = 0.14*0.531431095354094*1000/623.644444444444; lognormal variance with pedigree 0.0014, pedigree (1,3,2,1,1)
  (same comment as for pulpwood, hardwood, measured as solid wood under bark)
- pulpwood, hardwood, measured as solid wood under bark: 9.76812e-5 m3; = 0.14*0.419564031555022*1000/601.333333333333; lognormal variance with pedigree 0.0014, pedigree (1,3,2,1,1)
  (same comment as for pulpwood, hardwood, measured as solid wood under bark)
  properties: basic wood density 563.2, carbon content, non-fossil 0.494, dry mass 601.333 kg, heating value, net 6071.3 MJ, water content 0.8, wet mass 1082.4 kg
- pulpwood, softwood, measured as solid wood under bark: 0.000232634 m3; = 0.86*0.132547341339919*1000/490; lognormal variance with pedigree 0.0014, pedigree (1,3,2,1,1)
  Reported as 0.86 bone dry tonnes of SW logs. Converted to m3 using the DM property. The split of the different SW inputs is based on the market shares for pulpwood, softwood, measured as solid wood under bark
  properties: basic wood density 387.2, carbon content, non-fossil 0.494, dry mass 490 kg, heating value, net 4483.78 MJ, water content 0.8, wet mass 882 kg
- pulpwood, softwood, measured as solid wood under bark: 0.000581828 m3; = 0.86*0.331506544535353*1000/490; lognormal variance with pedigree 0.0014, pedigree (1,3,2,1,1)
  (same comment as for pulpwood, softwood, measured as solid wood under bark)
- pulpwood, softwood, measured as solid wood under bark: 0.000818971 m3; = 0.86*0.409485271447881*1000/430; lognormal variance with pedigree 0.0014, pedigree (1,3,2,1,1)
  (same comment as for pulpwood, softwood, measured as solid wood under bark)
  properties: basic wood density 387.2, carbon content, non-fossil 0.494, dry mass 430 kg, heating value, net 4483.78 MJ, water content 0.8, wet mass 774 kg
- pulpwood, softwood, measured as solid wood under bark: 0.000252922 m3; = 0.86*0.126460842676847*1000/430; lognormal variance with pedigree 0.0014, pedigree (1,3,2,1,1)
  (same comment as for pulpwood, softwood, measured as solid wood under bark)
- quicklime, milled, loose: 0.00382 kg; lognormal variance with pedigree 0.0014, pedigree (1,3,2,1,1)
  FEFCO 2018. Reported as CaO
  properties: dry mass 0.99 kg, water content 0.010101, wet mass 1 kg
- residual softwood, wet: -4.58824e-6 m3; name barkResidueAmount; = 3.51/765; lognormal variance with pedigree 0.0014, pedigree (1,3,2,1,1)
  FEFCO 2018. Reported as for residues/bark, wood. Assumed all softwood, which represents 87% of wood input (by weight). Density based on assummed water content on a dry mass basis of 70%.
  production volume
    Calculated from production volume of reference flow.
  properties: carbon content, non-fossil 0.494, dry mass 450 kg, heating value, net 5962.7 MJ, price 19.5 EUR2005, water content 0.7, wet mass 765 kg
- retention aid, for paper production: 0.001096 kg; lognormal variance with pedigree 0.0014, pedigree (1,3,2,1,1)
  FEFCO 2018. Proxy for polymer and retention agents
  properties: carbon content, fossil 0.5, dry mass 1 kg, heating value, net 15.15 MJ, wet mass 1 kg
- sludge from pulp and paper production: -0.00837717, -9.283e-5 kg (2 suppliers, which the file names only by identifier); sum of these -0.00847 kg; lognormal variance with pedigree 0.0014, pedigree (1,3,2,1,1)
  FEFCO 2018. Reported as residue, inorganic sludges (5.39 kg, 65% dry content) and organic sludges (3.08 kg, 35% dry content).
  production volume
    Calculated from production volume of reference product using the relative outputs.
  properties: carbon content, non-fossil 0.21, dry mass 0.540909 kg, heating value, net 2.65 MJ, water content 0.848739, wet mass 1 kg
- sodium hydroxide, without water, in 50% solution state: 0.00737 kg; lognormal variance with pedigree 0.0014, pedigree (1,3,2,1,1)
  FEFCO 2018
  properties: dry mass 1 kg, heating value, net 3.03 MJ, wet mass 1 kg
- sulfate pulp, bleached: 0.0155556 kg; = 14/0.9; lognormal variance with pedigree 0.0014, pedigree (1,3,2,1,1)
  FEFCO 2018. Reported as dry mass
  properties: carbon content, non-fossil 0.494, dry mass 0.9 kg, heating value, net 13.23 MJ, water content 0.111111, wet mass 1 kg
- sulfate pulp, unbleached: 0.000555556 kg; = 0.5/0.9; lognormal variance with pedigree 0.0014, pedigree (1,3,2,1,1)
  FEFCO 2018. Reported as dry mass
  properties: carbon content, non-fossil 0.494, dry mass 0.9 kg, heating value, net 13.23 MJ, price 0.355 EUR2005, water content 0.111111, wet mass 1 kg
- sulfuric acid: 0.00911 kg; lognormal variance with pedigree 0.0014, pedigree (1,3,2,1,1)
  FEFCO 2018
  properties: dry mass 1 kg, wet mass 1 kg
- tall oil, crude: -0.0181 kg; name tallOilAmount; lognormal variance with pedigree 0.0014, pedigree (1,3,2,1,1)
  Reported by FEFCO (2018) as sold byproduct
  production volume
    Calculated from production volume of reference product using the relative outputs.
  property carbon content, fossil 0; name tallOilAmount_C_content_fossil
  property carbon content, non-fossil 0.786; name tallOilAmount_C_content_non_fossil
  properties: dry mass 1 kg, heating value, net 23.82 MJ, price 0.652995 EUR2005, wet mass 1 kg
- transport, freight train: 0.387 metric ton*km; lognormal variance with pedigree 0.1208, pedigree (1,3,2,1,1)
  FEFCO 2018. Transport of wood
- transport, freight, inland waterways, barge: 1.235 metric ton*km; lognormal variance with pedigree 0.1208, pedigree (1,3,2,1,1)
  FEFCO 2018. Transport of wood
- transport, freight, lorry >32 metric ton, EURO5: 0.407 metric ton*km; lognormal variance with pedigree 0.1208, pedigree (1,3,2,1,1)
  FEFCO 2018. Transport of wood
- triazine-compound, unspecified: 4.95e-5 kg; lognormal variance with pedigree 0.0094, pedigree (1,3,2,1,3)
  (same comment as for dithiocarbamate-compound)
  properties: carbon content, fossil 0.475616, dry mass 1 kg, wet mass 1 kg
- turpentine: -0.0013 kg; name turpentineAmount; lognormal variance with pedigree 0.0014, pedigree (1,3,2,1,1)
  Reported by FEFCO (2018) as sold byproduct
  production volume
    Calculated from production volume of reference product using the relative outputs.
  property carbon content, fossil 0; name turpentineAmount_C_content_fossil
  property carbon content, non-fossil 0.882353; name turpentineAmount_C_content_non_fossil
  properties: dry mass 1 kg, heating value, net 26.74 MJ, price 1.826 EUR2005, wet mass 1 kg
- waste mineral oil: -3.38212e-6, -0.000136618 kg (2 suppliers, which the file names only by identifier); sum of these -0.00014 kg; lognormal variance with pedigree 0.0014, pedigree (1,3,2,1,1)
  FEFCO 2018. Reported as residue, lubricants and oil, 100 % dry content
  production volume
    Calculated from production volume of reference flow.
  properties: carbon content, fossil 0.864444, dry mass 1 kg, heating value, net 34.7 MJ, wet mass 1 kg
- waste paperboard, sorted: 0.3572 kg; lognormal variance with pedigree 0.0014, pedigree (1,3,2,1,1)
  FEFCO 2018. Reported as Mixed Grades (140 kg/t); Corrugated and Kraft. pre- consumer (36 kg/t); Corrugated and Kraft. post- consumer (180 kg/t);
  properties: carbon content, non-fossil 0.46, dry mass 0.88 kg, heating value, net 15.92 MJ, water content 0.136364, wet mass 1 kg
- wood chips, dry, measured as dry mass: 0.329926 kg; lognormal variance with pedigree 0.0014, pedigree (1,3,2,1,1)
  FEFCO 2018. Reported as sawmill residues, hardwood and biofuels: Sawmill residues are reported in tonne bone dry weight (110 kg), biofuels are reported as bark, scrap wood and tall oil in 3 GJ/tonne product. A LHV of 13.6 MJ/kg was assumed.
  properties: carbon content, non-fossil 0.494, dry mass 1 kg, heating value, net 9.99 MJ, water content 0.4, wet mass 1.4 kg

## Inputs from nature
- Oxygen [natural resource, in air]: 1.07328 kg; name O2; = (CO2_fossil+CO2_non_fossil)/(16*2+12) * (16*2) + (CO_fossil+CO_non_fossil)/(16+12) *16; lognormal variance with pedigree 0.0494, pedigree (2,5,2,1,4)
  Oxygen is required for the combustion process. Calculated value
  property carbon content, fossil 0; name O2_C_content_fossil
  property carbon content, non-fossil 0; name O2_C_content_non_fossil
- Water, river [natural resource, in water]: 0.035787 m3; lognormal variance with pedigree 0.0014, pedigree (1,3,2,1,1)
  FEFCO 2018. Reported as Surface water (35.49 ,m3), rain water (0.044 m3), and other water (0,253 m3)
- Water, well, in ground [natural resource, in water]: 0.00023 m3; lognormal variance with pedigree 0.0014, pedigree (1,3,2,1,1)
  FEFCO 2018. Reported as Ground water non fossil/renewable

## Emissions to nature
- Acetaldehyde [air, unspecified]: 3.06008e-7 kg; lognormal variance with pedigree 0.0508, pedigree (3,3,2,1,3)
  Estimation based on fuel input data and emission factors from corresponding ecoinvent fuel combustion datasets (see "Extrapolations" comment). The internal fuels mainly consist of the black liquor and bark from the wood input for pulp production. Internal fuels are represented by the calculated emissions but do not have the corresponding fuel input from technosphere, because they are supplied from within the system boundaries. The amounts of internal fuels used in the process are: Black liquor (10.3 GJ/t), Bark (1.6 GJ/t), malodorous gas, methanol and biosludge (0.02 GJ/t), Biogas (0.014 GJ/t). No proxy was available for the combustion of black liquor, malodorous gas and biosludge. Emissions from these internal energy generation processes are therefore only reflected in the key emission factors provided by the industry, other emissions constitute a data gap.
  Uncertainty: This emission was calculated from the ecoinvent emission factor of combustion of energy. Some energy sources do not have emission factor (LPG, peat and diesel) so other factors were used ( natural gas, lignite and light fuel oil).
- Acetic acid [air, unspecified]: 2.67784e-7 kg; lognormal variance with pedigree 0.0508, pedigree (3,3,2,1,3)
  (same comment as for Acetaldehyde)
- Acetone [air, unspecified]: 2.48336e-8 kg; lognormal variance with pedigree 0.0508, pedigree (3,3,2,1,3)
  (same comment as for Acetaldehyde)
- Aluminium III [air, unspecified]: 4.21135e-6 kg; lognormal variance with pedigree 0.6608, pedigree (3,3,2,1,3)
  (same comment as for Acetaldehyde)
- Ammonia [air, unspecified]: 7.9592e-6 kg; lognormal variance with pedigree 0.0508, pedigree (3,3,2,1,3)
  Estimation based on fuel input data and emission factors from corresponding ecoinvent fuel combustion datasets (see "Extrapolations" comment). The internal fuels mainly consist of the black liquor and bark from the wood input for pulp production. Internal fuels are represented by the calculated emissions but do not have the corresponding fuel input from technosphere, because they are supplied from within the system boundaries. The amounts of internal fuels used in the process are: Black liquor (10.3 GJ/t), Bark (1.6 GJ/t), malodorous gas, methanol and biosludge (0.02 GJ/t), Biogas (0.014 GJ/t). No proxy was available for the combustion of black liquor, malodorous gas and biosludge. Emissions from these internal energy generation processes are therefore only reflected in the key emission factors provided by the industry, other emissions constitute a data gap.
- Antimony ion [air, unspecified]: 7.39577e-10 kg; lognormal variance with pedigree 0.4108, pedigree (3,3,2,1,3)
  (same comment as for Acetaldehyde)
- Arsenic ion [air, unspecified]: 1.68127e-8 kg; lognormal variance with pedigree 0.0508, pedigree (3,3,2,1,3)
  (same comment as for Ammonia)
- Barium II [air, unspecified]: 5.01559e-8 kg; lognormal variance with pedigree 0.0508, pedigree (3,3,2,1,3)
  (same comment as for Acetaldehyde)
- Benzene [air, unspecified]: 4.84753e-6 kg; lognormal variance with pedigree 0.0508, pedigree (3,3,2,1,3)
  Estimation based on fuel input data and emission factors from corresponding ecoinvent fuel combustion datasets (see "Extrapolations" comment). The internal fuels mainly consist of the black liquor and bark from the wood input for pulp production. Internal fuels are represented by the calculated emissions but do not have the corresponding fuel input from technosphere, because they are supplied from within the system boundaries. The amounts of internal fuels used in the process are: Black liquor (10.3 GJ/t), Bark (1.6 GJ/t), malodorous gas, methanol and biosludge (0.02 GJ/t), Biogas (0.014 GJ/t). No proxy was available for the combustion of black liquor, malodorous gas and biosludge. Emissions from these internal energy generation processes are therefore only reflected in the key emission factors provided by the industry, other emissions constitute a data gap.
  Uncertainty: This emission was calculated from the ecoinvent emission factor of combustion of energy. Some energy sources do not have emission factor (LPG, peat and diesel) so other factors were used ( natural gas, lignite and light fuel oil, respectively).
- Benzene, ethyl- [air, unspecified]: 1.3773e-7 kg; lognormal variance with pedigree 0.0508, pedigree (3,3,2,1,3)
  (same comment as for Ammonia)
- Benzene, hexachloro- [air, unspecified]: 3.30552e-14 kg; lognormal variance with pedigree 0.0508, pedigree (3,3,2,1,3)
  (same comment as for Ammonia)
- Benzo(a)pyrene [air, unspecified]: 2.41807e-9 kg; lognormal variance with pedigree 0.3108, pedigree (3,3,2,1,3)
  (same comment as for Acetaldehyde)
- Beryllium II [air, unspecified]: 5.01559e-10 kg; lognormal variance with pedigree 0.0508, pedigree (3,3,2,1,3)
  (same comment as for Acetaldehyde)
- Boron [air, unspecified]: 2.40923e-7 kg; lognormal variance with pedigree 0.6608, pedigree (3,3,2,1,3)
  (same comment as for Acetaldehyde)
- Bromine [air, unspecified]: 2.79214e-7 kg; lognormal variance with pedigree 0.0508, pedigree (3,3,2,1,3)
  (same comment as for Acetaldehyde)
- Butane [air, unspecified]: 8.1784e-7 kg; lognormal variance with pedigree 0.0508, pedigree (3,3,2,1,3)
  (same comment as for Acetaldehyde)
- Cadmium II [air, unspecified]: 3.86533e-9 kg; lognormal variance with pedigree 0.6608, pedigree (3,3,2,1,3)
  (same comment as for Ammonia)
- Calcium [air, unspecified]: 2.7617e-5 kg; lognormal variance with pedigree 0.0508, pedigree (3,3,2,1,3)
  (same comment as for Acetaldehyde)
- Carbon dioxide, fossil [air, unspecified]: 0.122198 kg; name CO2_fossil; lognormal variance with pedigree 0.0494, pedigree (2,5,2,1,4)
  This value represents a calculated value, i.e., it is not based onFEFCO (2018) data. It was calculated based on the fossil fuel input data and emission factors from corresponding ecoinvent fuel combustion datasets (see "Extrapolations" comment).
- Carbon dioxide, non-fossil [air, unspecified]: 1.35128 kg; name CO2_non_fossil; lognormal variance with pedigree 0.0014, pedigree (1,3,2,1,1)
  FEFCO 2018
- Carbon monoxide, fossil [air, unspecified]: 0.00153 kg; name CO_fossil; lognormal variance with pedigree 0.6528, pedigree (3,3,2,1,1)
  FEFCO 2018. Reported as CO. Assumed to be Carbon monoxide, fossil
- Carbon monoxide, non-fossil [air, unspecified]: 0.00137733 kg; name CO_non_fossil; lognormal variance with pedigree 0.6608, pedigree (3,3,2,1,3)
  (same comment as for Ammonia)
- Chlorine [air, unspecified]: 8.2638e-7 kg; lognormal variance with pedigree 0.0508, pedigree (3,3,2,1,3)
  (same comment as for Ammonia)
- Chromium III [air, unspecified]: 2.80809e-8 kg; lognormal variance with pedigree 0.6608, pedigree (3,3,2,1,3)
  (same comment as for Ammonia)
- Chromium VI [air, unspecified]: 1.27416e-9 kg; lognormal variance with pedigree 0.6608, pedigree (3,3,2,1,3)
  (same comment as for Acetaldehyde)
- Cobalt II [air, unspecified]: 6.87904e-9 kg; lognormal variance with pedigree 0.6608, pedigree (3,3,2,1,3)
  (same comment as for Acetaldehyde)
- Copper ion [air, unspecified]: 1.80757e-7 kg; lognormal variance with pedigree 0.6608, pedigree (3,3,2,1,3)
  (same comment as for Ammonia)
- Dinitrogen monoxide [air, unspecified]: 1.1255e-5 kg; lognormal variance with pedigree 0.0508, pedigree (3,3,2,1,3)
  (same comment as for Ammonia)
- Dioxins, measured as 2,3,7,8-tetrachlorodibenzo-p-dioxin [air, unspecified]: 1.50245e-13 kg; lognormal variance with pedigree 0.0508, pedigree (3,3,2,1,3)
  (same comment as for Ammonia)
- Ethane [air, unspecified]: 6.57035e-7 kg; lognormal variance with pedigree 0.0508, pedigree (3,3,2,1,3)
  (same comment as for Acetaldehyde)
- Ethanol [air, unspecified]: 4.96671e-8 kg; lognormal variance with pedigree 0.0508, pedigree (3,3,2,1,3)
  (same comment as for Acetaldehyde)
- Ethylene [air, unspecified]: 1.31407e-6 kg; lognormal variance with pedigree 0.0528, pedigree (3,3,2,5,3)
  (same comment as for Acetaldehyde)
- Ethyne [air, unspecified]: 2.19012e-7 kg; lognormal variance with pedigree 0.0508, pedigree (3,3,2,1,3)
  (same comment as for Acetaldehyde)
- Fluorine [air, unspecified]: 2.2955e-7 kg; lognormal variance with pedigree 0.0508, pedigree (3,3,2,1,3)
  (same comment as for Ammonia)
- Formaldehyde [air, unspecified]: 9.05857e-7 kg; lognormal variance with pedigree 0.0508, pedigree (3,3,2,1,3)
  (same comment as for Acetaldehyde)
- Hydrocarbons, aliphatic, alkanes, unspecified [air, unspecified]: 4.54452e-6 kg; lognormal variance with pedigree 0.0508, pedigree (3,3,2,1,3)
  (same comment as for Acetaldehyde)
- Hydrocarbons, aliphatic, unsaturated [air, unspecified]: 1.44561e-5 kg; lognormal variance with pedigree 0.0508, pedigree (3,3,2,1,3)
  (same comment as for Acetaldehyde)
- Hydrocarbons, aromatic [air, unspecified]: 2.78564e-8 kg; lognormal variance with pedigree 0.0508, pedigree (3,3,2,1,3)
  (same comment as for Acetaldehyde)
- Hydrochloric acid [air, unspecified]: 1.59794e-5 kg; lognormal variance with pedigree 0.0528, pedigree (3,3,2,5,3)
  (same comment as for Acetaldehyde)
- Hydrogen fluoride [air, unspecified]: 4.98383e-7 kg; lognormal variance with pedigree 0.0508, pedigree (3,3,2,1,3)
  (same comment as for Acetaldehyde)
- Hydrogen sulfide [air, unspecified]: 1.70154e-5 kg; = 0.016/(32.065/34.1); lognormal variance with pedigree 0.0408, pedigree (1,3,2,1,1)
  FEFCO 2018. Reported as S (0.016 kg). Converted stoichiometrically to H2S.
- Iodine [air, unspecified]: 4.65097e-9 kg; lognormal variance with pedigree 0.0508, pedigree (3,3,2,1,3)
  (same comment as for Acetaldehyde)
- Iron ion [air, unspecified]: 1.91882e-6 kg; lognormal variance with pedigree 0.6608, pedigree (3,3,2,1,3)
  (same comment as for Acetaldehyde)
- Lead II [air, unspecified]: 1.68382e-7 kg; lognormal variance with pedigree 0.6608, pedigree (3,3,2,1,3)
  (same comment as for Ammonia)
- Lead-210 [air, unspecified]: 1.83531e-5 kBq; lognormal variance with pedigree 0.3108, pedigree (3,3,2,1,3)
  (same comment as for Acetaldehyde)
- Magnesium [air, unspecified]: 3.16127e-6 kg; lognormal variance with pedigree 0.6608, pedigree (3,3,2,1,3)
  (same comment as for Acetaldehyde)
- Manganese II [air, unspecified]: 7.89172e-7 kg; lognormal variance with pedigree 0.6608, pedigree (3,3,2,1,3)
  (same comment as for Acetaldehyde)
- Mercury II [air, unspecified]: 2.64519e-9 kg; lognormal variance with pedigree 0.6608, pedigree (3,3,2,1,3)
  (same comment as for Ammonia)
- Methane, fossil [air, unspecified]: 8.19566e-6 kg; lognormal variance with pedigree 0.0508, pedigree (3,3,2,1,3)
  (same comment as for Acetaldehyde)
- Methane, non-fossil [air, unspecified]: 1.3801e-5 kg; lognormal variance with pedigree 0.0508, pedigree (3,3,2,1,3)
  (same comment as for Acetaldehyde)
- Methanol [air, unspecified]: 8.44341e-8 kg; lognormal variance with pedigree 0.0508, pedigree (3,3,2,1,3)
  Estimation based on fuel input data and emission factors from corresponding ecoinvent fuel combustion datasets (see "Extrapolations" comment). The internal fuels mainly consist of the black liquor and bark from the wood input for pulp production. Internal fuels are represented by the calculated emissions but do not have the corresponding fuel input from technosphere, because they are supplied from within the system boundaries. The amounts of internal fuels used in the process are: Black liquor (10.3 GJ/t), Bark (1.6 GJ/t), malodorous gas, methanol and biosludge (0.02 GJ/t), Biogas (0.014 GJ/t). No proxy was available for the combustion of black liquor, malodorous gas and biosludge. Emissions from these internal energy generation processes are therefore only reflected in the key emission factors provided by the industry, other emissions constitute a data gap.
  Uncertainty: The data for Semichemical Fluting and Kraftliner represent more than 70% of the total annual production of corrugated base papers from primary fibres in Europe. The data for Semichemical Fluting and Kraftliner also represent 78% of the total consumption of these grades for corrugated board production in Europe. These paper grades are produced in large mills, located in Austria, Finland, France, Portugal, Slovakia and Sweden. The data are for the year 2008. The data were collected directly from the producers and checked by technical experts. This emission was calculated from the ecoinvent emission factor of combustion of energy. Some energy sources do not have emission factor (LPG, peat and diesel) so other factors were used ( natural gas, lignite and light fuel oil).
- Molybdenum VI [air, unspecified]: 3.38469e-9 kg; lognormal variance with pedigree 0.6608, pedigree (3,3,2,1,3)
  (same comment as for Acetaldehyde)
- NMVOC, non-methane volatile organic compounds [air, unspecified]: 3.28914e-5 kg; lognormal variance with pedigree 0.0508, pedigree (3,3,2,1,3)
  (same comment as for Ammonia)
- Nickel II [air, unspecified]: 1.16326e-7 kg; lognormal variance with pedigree 0.6608, pedigree (3,3,2,1,3)
  (same comment as for Ammonia)
- Nitrogen oxides [air, unspecified]: 0.00102 kg; lognormal variance with pedigree 0.0488, pedigree (1,3,2,1,3)
  FEFCO 2018. Reported as NOx (as NO2)
- PAH, polycyclic aromatic hydrocarbons [air, unspecified]: 6.23446e-8 kg; lognormal variance with pedigree 0.3108, pedigree (3,3,2,1,3)
  (same comment as for Ammonia)
- Particulate Matter, < 2.5 um [air, unspecified]: 0.000216081 kg; lognormal variance with pedigree 0.3108, pedigree (3,3,2,1,3)
  (same comment as for Methanol)
- Particulate Matter, > 10 um [air, unspecified]: 8.9e-5 kg; lognormal variance with pedigree 0.0508, pedigree (3,3,2,1,3)
  FEFCO 2018. Reported as Dust
  Uncertainty: This emission was calculated from the ecoinvent emission factor of combustion of energy. Some energy sources do not have emission factor (LPG, peat and diesel) so other factors were used ( natural gas, lignite and light fuel oil).
- Particulate Matter, > 2.5 um and < 10um [air, unspecified]: 1.96366e-5 kg; lognormal variance with pedigree 0.1308, pedigree (3,3,2,1,3)
  (same comment as for Acetaldehyde)
- Pentane [air, unspecified]: 1.36876e-6 kg; lognormal variance with pedigree 0.0508, pedigree (3,3,2,1,3)
  (same comment as for Acetaldehyde)
- Phenol [air, unspecified]: 2.5e-9 kg; lognormal variance with pedigree 0.0508, pedigree (3,3,2,1,3)
  (same comment as for Acetaldehyde)
- Phenol, pentachloro- [air, unspecified]: 3.71871e-11 kg; lognormal variance with pedigree 0.0508, pedigree (3,3,2,1,3)
  (same comment as for Ammonia)
- Phosphorus [air, unspecified]: 1.40233e-6 kg; lognormal variance with pedigree 0.0508, pedigree (3,3,2,1,3)
  (same comment as for Acetaldehyde)
- Polonium-210 [air, unspecified]: 3.3552e-5 kBq; lognormal variance with pedigree 0.3108, pedigree (3,3,2,1,3)
  (same comment as for Acetaldehyde)
- Potassium I [air, unspecified]: 0.000107926 kg; lognormal variance with pedigree 0.6608, pedigree (3,3,2,1,3)
  (same comment as for Acetaldehyde)
- Potassium-40 [air, unspecified]: 5.32181e-6 kBq; lognormal variance with pedigree 0.3108, pedigree (3,3,2,1,3)
  (same comment as for Acetaldehyde)
- Propane [air, unspecified]: 6.69615e-7 kg; lognormal variance with pedigree 0.0508, pedigree (3,3,2,1,3)
  (same comment as for Acetaldehyde)
- Propene [air, unspecified]: 2.19012e-7 kg; lognormal variance with pedigree 0.0508, pedigree (3,3,2,1,3)
  (same comment as for Acetaldehyde)
- Propionic acid [air, unspecified]: 2.246e-8 kg; lognormal variance with pedigree 0.0508, pedigree (3,3,2,1,3)
  (same comment as for Acetaldehyde)
- Radium-226 [air, unspecified]: 4.73628e-6 kBq; lognormal variance with pedigree 0.3108, pedigree (3,3,2,1,3)
  (same comment as for Acetaldehyde)
- Radium-228 [air, unspecified]: 2.52645e-5 kBq; lognormal variance with pedigree 0.3108, pedigree (3,3,2,1,3)
  (same comment as for Acetaldehyde)
- Radon-220 [air, unspecified]: 4.08023e-7 kBq; lognormal variance with pedigree 0.3108, pedigree (3,3,2,1,3)
  (same comment as for Acetaldehyde)
- Radon-222 [air, unspecified]: 4.08023e-7 kBq; lognormal variance with pedigree 0.3108, pedigree (3,3,2,1,3)
  (same comment as for Acetaldehyde)
- Scandium [air, unspecified]: 4.92069e-10 kg; lognormal variance with pedigree 0.0508, pedigree (3,3,2,1,3)
  (same comment as for Acetaldehyde)
- Selenium IV [air, unspecified]: 6.04415e-9 kg; lognormal variance with pedigree 0.0508, pedigree (3,3,2,1,3)
  (same comment as for Acetaldehyde)
- Silicon [air, unspecified]: 6.73577e-6 kg; lognormal variance with pedigree 0.0508, pedigree (3,3,2,1,3)
  (same comment as for Acetaldehyde)
- Sodium [air, unspecified]: 6.34905e-6 kg; lognormal variance with pedigree 0.0508, pedigree (3,3,2,1,3)
  (same comment as for Acetaldehyde)
- Strontium [air, unspecified]: 7.50494e-8 kg; lognormal variance with pedigree 0.0508, pedigree (3,3,2,1,3)
  (same comment as for Acetaldehyde)
- Sulfur dioxide [air, unspecified]: 0.000276556 kg; lognormal variance with pedigree 0.0114, pedigree (3,3,2,1,3)
  (same comment as for Ammonia)
- Sulfur oxides [air, unspecified]: 0.000293 kg; lognormal variance with pedigree 0.0094, pedigree (1,3,2,1,3)
  FEFCO 2018. Reported as SOx (as SO2)
- Thallium I [air, unspecified]: 6.13707e-10 kg; lognormal variance with pedigree 0.0508, pedigree (3,3,2,1,3)
  (same comment as for Acetaldehyde)
- Thorium [air, unspecified]: 7.52394e-10 kg; lognormal variance with pedigree 0.0508, pedigree (3,3,2,1,3)
  (same comment as for Acetaldehyde)
- Thorium-228 [air, unspecified]: 2.17113e-6 kBq; lognormal variance with pedigree 0.3108, pedigree (3,3,2,1,3)
  (same comment as for Acetaldehyde)
- Thorium-232 [air, unspecified]: 1.38108e-6 kBq; lognormal variance with pedigree 0.3108, pedigree (3,3,2,1,3)
  (same comment as for Acetaldehyde)
- Tin ion [air, unspecified]: 2.55331e-10 kg; lognormal variance with pedigree 0.6608, pedigree (3,3,2,1,3)
  (same comment as for Acetaldehyde)
- Titanium ion [air, unspecified]: 1.48326e-7 kg; lognormal variance with pedigree 0.6608, pedigree (3,3,2,1,3)
  (same comment as for Acetaldehyde)
- Toluene [air, unspecified]: 1.65369e-6 kg; lognormal variance with pedigree 0.0508, pedigree (3,3,2,1,3)
  (same comment as for Acetaldehyde)
- Uranium [air, unspecified]: 1.00695e-9 kg; lognormal variance with pedigree 0.0508, pedigree (3,3,2,1,3)
  (same comment as for Acetaldehyde)
- Uranium-238 [air, unspecified]: 3.94723e-6 kBq; lognormal variance with pedigree 0.3108, pedigree (3,3,2,1,3)
  (same comment as for Acetaldehyde)
- Vanadium V [air, unspecified]: 1.80928e-7 kg; lognormal variance with pedigree 0.0508, pedigree (3,3,2,1,3)
  (same comment as for Acetaldehyde)
- Water [air, unspecified]: 0.001187 m3; lognormal variance with pedigree 0.090225, pedigree (4,4,2,2,4)
  FEFCO 2018. Reported as water input-output
- Xylene [air, unspecified]: 5.53023e-8 kg; lognormal variance with pedigree 0.0508, pedigree (3,3,2,1,3)
  (same comment as for Acetaldehyde)
- Zinc II [air, unspecified]: 1.45821e-6 kg; lognormal variance with pedigree 0.6608, pedigree (3,3,2,1,3)
  (same comment as for Ammonia)
- m-Xylene [air, unspecified]: 5.5092e-7 kg; lognormal variance with pedigree 0.0508, pedigree (3,3,2,1,3)
  (same comment as for Ammonia)
- BOD5, Biological Oxygen Demand [water, unspecified]: 0.002066 kg; lognormal variance with pedigree 0.0488, pedigree (1,3,2,1,3)
  FEFCO 2018
- COD, Chemical Oxygen Demand [water, unspecified]: 0.0056 kg; lognormal variance with pedigree 0.0488, pedigree (1,3,2,1,3)
  FEFCO 2018
- DOC, Dissolved Organic Carbon [water, unspecified]: 0.002099 kg; lognormal variance with pedigree 0.0428, pedigree (3,3,2,1,1)
  assumed to be equal to TOC
- Nitrogen [water, unspecified]: 0.000129 kg; lognormal variance with pedigree 0.0488, pedigree (1,3,2,1,3)
  FEFCO 2018
- Phosphorus [water, unspecified]: 1.5e-5 kg; lognormal variance with pedigree 0.0488, pedigree (1,3,2,1,3)
  FEFCO 2018
- Suspended solids, unspecified [water, unspecified]: 0.001118 kg; lognormal variance with pedigree 0.0488, pedigree (1,3,2,1,3)
  FEFCO 2018
- TOC, Total Organic Carbon [water, unspecified]: 0.002099 kg; lognormal variance with pedigree 0.0408, pedigree (1,3,2,1,1)
  FEFCO 2018
- Water [water, unspecified]: 0.03483 m3; lognormal variance with pedigree 0.0014, pedigree (1,3,2,1,1)
  FEFCO 2018. Accounts for both "thermally polluted" (14,63 m3) and "process water after treatment" (20,20 m3) water output

## Sampling procedure
Data were collected from the producers by Cepi ContainerBoard and FEFCO (European Federation of Corrugated Board Manufacturers) for the European Database for Corrugated Board Life Cycle Studies), checked by technical experts and reviewed by the Institut für Energie- und Umweltforschung Heidelberg (ifeu). The data for Semichemical Fluting and Kraftliner jointly represent ca. 85% of the total annual production of corrugated base papers from primary fibres in Europe. The data for Semichemical Fluting and Kraftliner also jointly represent ca. 90% of the total consumption of these grades for corrugated board production in Europe. Reference(s): FEFCO. 2018. European Database for Corrugated Board Life Cycle Studies 2018. Reference(s): https://www.fefco.org/sites/default/files/documents/LCA%20Report%202019_revised_%20p%2037.pdf, accessed September 2022.

## Extrapolations
Additional air emissions from the combustion of fossil fuels estimated based on industrial heating datasets from the ecoinvent database: natural gas: heat production, natural gas, at industrial furnace >100kW, Europe without Switzerland; heavy fuel oil: heat production, heavy fuel oil, at industrial furnace 1MW, Europe without Switzerland; light fuel oil: heat production, light fuel oil, at industrial furnace 1MW, Europe without Switzerland; diesel: heat production, light fuel oil, at industrial furnace 1MW, Europe without Switzerland; LPG: heat production, natural gas, at industrial furnace >100kW, Europe without Switzerland; Coal: heat production, at hard coal industrial furnace 1-10MW, Europe without Switzerland; Peat: heat production, lignite briquette, at stove 5-15kW, Europe without Switzerland; biogas: heat production, natural gas, at industrial furnace >100kW, Europe without Switzerland; Biofuel (bark, scrap wood, tall oil) and bark: heat production, wood chips from industry, at furnace 1000kW, CH. CO2, CO and CH4 emissions from biogas were modelled as non-fossil.
