# resorcinol production, hydrolysis of meta-phenylene diamine

Dataset: EcoSpold 2, unit process
Geography: GLO
Time period: 2002-01-01 to 2022-12-31
Technology level: current
Classification: ISIC rev.4 ecoinvent: 2011:Manufacture of basic chemicals
Synonyms: 1,3-Benzenediol; 1,3-Dihydroxybenzene; m-Dihydroxybenzene; m-Benzenediol
Scenario: Business-as-Usual
System model: Substitution, consequential, long-term
Generated by: Daria Dellenbach
Published in: Thebeeapelo, John Khaile 2002
Database: ecoinvent
isCopyrightProtected: true

## General comment
This dataset represents the production of resorcinol from nitration of benzene and hydrogenation of separed nitrobenzene isomeres. This route of production involved high selectivity of isomers and no undesirable by-products (no organic waste is generated). Para- and ortho-phenylenediamine isomers are produced as by-products and separated by distillation before further hydrogenation of meta-phenylenediamine to resorcinol.
Resorcinol is an organic substance with a CAS no.: 000108-46-3. It is called benzene-1,3-diol under IUPAC naming and its molecular formula is: C6H6O2. It is solid under normal conditions of temperature and pressure as white flakes. It is modelled as a pure substance. On a consumer level, is used in the following products: cosmetics and personal care products. On industrial sites, the substance is used for the manufacture of products in the following sectors: chemicals, rubber products, plastic products, fabricated metal products and machinery and vehicles.
[This dataset was already contained in the ecoinvent database version 2. It was not individually updated during the transfer to ecoinvent version 3. Life Cycle Impact Assessment results may still have changed, as they are affected by changes in the supply chain, i.e. in other datasets. This dataset was generated following the ecoinvent quality guidelines for version 2. It may have been subject to central changes described in the ecoinvent version 3 change report (http://www.ecoinvent.org/database/ecoinvent-version-3/reports-of-changes/), and the results of the central updates were reviewed extensively. The changes added e.g. consistent water flows and other information throughout the database. The documentation of this dataset can be found in the ecoinvent reports of version 2, which are still available via the ecoinvent website. The change report linked above covers all central changes that were made during the conversion process.]
References:
Thebeeapelo J. K. (2002): The investigation of the hydrolysis reaction of m-phenylene diamine to resorcinol, Master Thesis, Port Elizabeth Technikon.
[This dataset is meant to replace the following datasets:
- phenylenediamine production, GLO, 2002 - 2002]

## Included activities start
With benzene nitration.

## Included activities end
With production of separated o- and p-phenylenediamine and resorcinol. It includes raw materials, and energy. Emissions to air and water as well as infrastructure are estimated.

## Technology
Resorcinol is produced by nitration of benzene to o-,m- and para-dinitrophenylene, followed by hydrogenation of separed nitrobenzene isomeres. Para- and ortho-phenylenediamine isomers are produced as by-products and separated by distillation before further hydrogenation of meta-phenylenediamine to resorcinol.
References:
Thebeeapelo J. K. (2002): The investigation of the hydrolysis reaction of m-phenylene diamine to resorcinol, Master Thesis, Port Elizabeth Technikon.

## Reference product
- resorcinol: 1 kg; name RP; By-product classification allocatable product; CPC 34139: Other alcohols, phenols, phenol-alcohols, and their halogenated, sulphonated, nitrated or nitrosated derivativ[…]; CAS 108-46-3
  production volume 5.9e6 kg
    The global resorcinol market size was 59.0 kilotons in 2016. It is known, that the preferred production methods are benzene disulfonation and hydroperoxidation of meta-diisopropylbenzene over hydrolysis of meta-phenylenediamine, therefore the market shares were assumed to be 45%:45%:10%.
    References:
    Resorcinol Market Size, Share & Trends Analysis Report By Application (Rubber Products, Wood Adhesives, UV Stabilizers, Flame Retardants), By Region, And Segment Forecasts, 2018 - 2025, Report Overview, avaiable here: https://www.grandviewresearch.com/industry-analysis/resorcinol-market, last accessed 20-07-2022.
    Schmiedel K.W., Decker D. (2011): Resorcinol, Ullmann's Encyclopedia of Industrial Chemistry, Wiley-VCH.
  property price 9.02683 EUR2005
    The price is calculated based on price information 2020/2021 from chemAnalyst (available here: https://www.chemanalyst.com/Pricing-data/resorcinol-1191) and ECHEMI (available here: https://www.echemi.com/productsInformation/pd1804031006-995-pharmaceutical-intermediates-resorcinol.html), both sources last accessed 2022-06-15.
    The prices were converted to EUR based on the annual exchange rates published by the European Central Bank (https://sdw.ecb.europa.eu/quickview.do?SERIES_KEY=120.EXR.A.USD.EUR.SP00.A, last accessed on 2022-02-15) and adjusted for inflation relative to 2005 using the producer price index (PPI) of the euro area, published by eurostat (https://appsso.eurostat.ec.europa.eu/nui/show.do?dataset=sts_inpp_a&lang=en, last accessed on 2022-05-04).
  properties: carbon allocation 0.653951 kg, carbon content 0.653951, carbon content, fossil 0.653951, carbon content, non-fossil 0, dry mass 1 kg, heating value, net 26.434 MJ, water content 0, water in wet mass 0 kg, wet mass 1 kg

## Inputs from technosphere
- ammonia, anhydrous, liquid: 0.0328337, 0.00668032, 0.0637369, 0.245514, 0.0298635, 0.141058, 0.0197759, 0.706483, 0.0650552 kg (9 suppliers, which the file names only by identifier); sum of these 1.311 kg; lognormal variance with pedigree 0.1652, pedigree (2,4,5,5,5)
  Literature value. As reported by Thebeeapelo (2002).
  properties: dry mass 1 kg, wet mass 1 kg
- benzene: 1.016 kg; lognormal variance with pedigree 0.1652, pedigree (2,4,5,5,5)
  Literature value. As reported by Thebeeapelo (2002).
  Uncertainty: literature
  properties: carbon content, fossil 0.923077, dry mass 1 kg, heating value, net 42.5 MJ, wet mass 1 kg
- chemical factory, organics: 4e-10 unit; lognormal variance with pedigree 0.3427, pedigree (2,2,5,5,1)
  Calculated based on literature data published by the industry. For this activity, no information was readily available concerning infrastructure and land-use. Therefore, the infrastructure is estimated based on data from two chemical factories, the BASF site of Ludwigshafen and the chemical factory in Gendorf (which are both located in Germany), which produce a wide range of chemical substances. Based on this data, the following assumptions are made: the built area amounts to about 4.2 ha, the plant has an average output of 50'000 t/a and a lifespan of fifty years. The estimated infrastructure amount is therefore 4.00 E-10 units per kg of produced chemical.
  References:
  Althaus H.-J., Chudacoff M., Hischier R., Jungbluth N., Osses M. and Primas A. (2007) Life Cycle Inventories of Chemicals. ecoinvent report No. 8, v2.0. EMPA Dübendorf, Swiss Centre for Life Cycle Inventories, Dübendorf, CH.
  Gendorf (2000) Umwelterklärung 2000, Werk Gendorf. Werk Gendorf, Burgkirchen.
  Uncertainty: infrastructure of a typical plant
- electricity, medium voltage: 2.112 kWh; lognormal variance with pedigree 0.1666, pedigree (3,4,5,5,5)
  Literature value. As reported by Thebeeapelo (2002). Value includes hydrolysis step of m-phenyldiamine to resorcinol, due to lack of data for desagregation. Thus, value is overestimated.
  Uncertainty: estimation
- ethyl tert-butyl ether: 0.035 kg; lognormal variance with pedigree 0.1652, pedigree (2,4,5,5,5)
  Approximated process. Represents diisopropyl ether as reported by Thebeeapelo (2002). No specified fuel, assumed to be natural gas.
  properties: carbon content, fossil 0.454, carbon content, non-fossil 0.245, dry mass 1 kg, heating value, net 37.97 MJ, wet mass 1 kg
- hazardous waste, for incineration: -0.0176487, -0.675178, -1.404 kg (3 suppliers, which the file names only by identifier); sum of these -2.09683 kg; lognormal variance with pedigree 0.0986, pedigree (4,5,5,5,4)
  This exchange was introduced to fix the mass balance. All excess chemicals are assumed to be incinerated.
  production volume
    Calculated from production volume of reference product using the relative outputs.
  properties: carbon content, fossil 0.554667, dry mass 0.75 kg, heating value, net 17 MJ, water content 0.333333, wet mass 1 kg
  note on carbon content, fossil: Tab A.6, ecoinvent v2.2 report 13_I. C content has been calculated after data in the tables, and then referred to 1 kg DM
  note on heating value, net: Value taken from the general comment of the treatment dataset.
- heat, district or industrial, natural gas: 49.997 MJ; lognormal variance with pedigree 0.1652, pedigree (2,4,5,5,5)
  Literature value. As reported by Thebeeapelo (2002). No specified fuel, assumed to be natural gas.
  properties: heating value, net 1 MJ
- methanol: 0.015 kg; lognormal variance with pedigree 0.1666, pedigree (3,4,5,5,5)
  Literature value. As reported by Thebeeapelo (2002).
  properties: carbon content, fossil 0.375, dry mass 1 kg, heating value, net 26.49 MJ, wet mass 1 kg
- nickel, class 1: 0.0002458 kg; lognormal variance with pedigree 0.1726, pedigree (4,4,5,5,5)
  Approximated process. Represents use of catalyst. No specific catalysts reported, assumed to be Ni/SiO2 catalyst containing 20% Ni. Total catalyst amount (1.229kg/t) as reported by Thebeeapelo (2002).
  properties: dry mass 1 kg, wet mass 1 kg
- nitric acid, without water, in 50% solution state: 0.0627789, 0.0354591, 0.215919, 0.0524917, 0.0526867, 0.461296, 0.131022, 0.17039, 0.400032, 0.0569233 kg (10 suppliers, which the file names only by identifier); sum of these 1.639 kg; lognormal variance with pedigree 0.1652, pedigree (2,4,5,5,5)
  Literature value. As reported by Thebeeapelo (2002).
  Uncertainty: literature
  properties: dry mass 1 kg, wet mass 1 kg
- nitrogen, liquid: 0.076129, 0.076129 kg (2 suppliers, which the file names only by identifier); sum of these 0.152258 kg; lognormal variance with pedigree 0.1666, pedigree (3,4,5,5,5)
  Literature value. As reported by Thebeeapelo (2002). Report as nitrogen volume, density used 1.229 kg/Nm3.
  properties: dry mass 1 kg, wet mass 1 kg
- ortho-phenylene diamine: -0.149 kg; name OPD; lognormal variance with pedigree 0.0866, pedigree (3,4,5,5,4)
  Literature value. As reported by Thebeeapelo (2002).
  production volume
    Calculated from production volume of reference product using the relative outputs.
  properties: carbon content, fossil 0.67, dry mass 1 kg, heating value, net 29.16 MJ, price 9.8469 EUR2005, wet mass 1 kg
- para-phenylene diamine: -0.022 kg; name PPD; lognormal variance with pedigree 0.0866, pedigree (3,4,5,5,4)
  Literature value. As reported by Thebeeapelo (2002).
  production volume
    Calculated from production volume of reference product using the relative outputs.
  properties: carbon content, fossil 0.67, dry mass 1 kg, heating value, net 29.16 MJ, price 4.70968 EUR2005, wet mass 1 kg
- phosphoric acid, industrial grade, without water, in 85% solution state: 0.06 kg; lognormal variance with pedigree 0.1652, pedigree (2,4,5,5,5)
  Literature value. As reported by Thebeeapelo (2002).
  properties: dry mass 1 kg, wet mass 1 kg
- silica sand: 0.0009832 kg; lognormal variance with pedigree 0.1726, pedigree (4,4,5,5,5)
  (same comment as for nickel, class 1)
  properties: dry mass 0.99 kg, water content 0.010101, wet mass 1 kg
- soda ash, light: 0.115 kg; lognormal variance with pedigree 0.1652, pedigree (2,4,5,5,5)
  Literature value. As reported by Thebeeapelo (2002).
  properties: carbon content, fossil 0.0517241, dry mass 1 kg, heating value, net 3.43 MJ, wet mass 1 kg
- steam, in chemical industry: 18.7731, 3.30993 kg (2 suppliers, which the file names only by identifier); sum of these 22.083 kg; lognormal variance with pedigree 0.1652, pedigree (2,4,5,5,5)
  Literature value. As reported by Thebeeapelo (2002).
  properties: dry mass 1 kg, wet mass 1 kg
- sulfuric acid: 0.0161189, 0.0668811 kg (2 suppliers, which the file names only by identifier); sum of these 0.083 kg; lognormal variance with pedigree 0.1652, pedigree (2,4,5,5,5)
  Literature value. As reported by Thebeeapelo (2002).
  Uncertainty: literature
  properties: dry mass 1 kg, wet mass 1 kg
- wastewater, average: -0.0102287, -0.0001523, -0.0427764, -0.000257063 m3 (4 suppliers, which the file names only by identifier); sum of these -0.0534145 m3; lognormal variance with pedigree 0.0986, pedigree (4,5,5,5,4)
  Approximated process. Represents treatment of wastewater from phenylenediamine production.
  production volume
    Calculated from production volume of reference product using the relative outputs.
  properties: carbon content, non-fossil 0.194039, dry mass 0.346837 kg, water content 2882.2, wet mass 1000 kg
  note on carbon content, non-fossil: 0.0673 kg TOC/m3 (Tab A.17, ecoinvent v2.2 report 13_I). TOC was considered as Total Carbon.
- water, deionised: 41.187, 0.0456712, 12.6873 kg (3 suppliers, which the file names only by identifier); sum of these 53.92 kg; lognormal variance with pedigree 0.1652, pedigree (2,4,5,5,5)
  (same comment as for heat, district or industrial, natural gas)
  properties: wet mass 1 kg

## Emissions to nature
- Benzene [air, urban air close to ground]: 0.00031 kg; lognormal variance with pedigree 0.17, pedigree (5,5,5,5,4)
  Approximated value. Directly taken from nitrobenzene production.
  Uncertainty: emissions, assumed
- Nitrogen [air, unspecified]: 0.152258 kg; lognormal variance with pedigree 0.1232, pedigree (2,4,5,4,4)
  Calculated value. The amount of nitrogen released to air is equal to the amount of nitrogen entering the activity.
- AOX, Adsorbable Organic Halogen [water, unspecified]: 2.75e-5 kg; lognormal variance with pedigree 0.0832, pedigree (2,3,5,5,1)
  Approximated value. Directly taken from nitrobenzene production.
  Uncertainty: literature
- Ammonium [water, unspecified]: 1.311 kg; lognormal variance with pedigree 0.218, pedigree (4,5,5,5,5)
  Estimated value. Used for neutralising nitric acid excess.
- BOD5, Biological Oxygen Demand [water, surface water]: 5e-6 kg; lognormal variance with pedigree 0.0832, pedigree (2,3,5,5,1)
  Approximated value. Directly taken from nitrobenzene production.
  Uncertainty: literature
- COD, Chemical Oxygen Demand [water, surface water]: 5e-6 kg; lognormal variance with pedigree 0.3432, pedigree (2,3,5,5,1)
  Approximated value. Directly taken from nitrobenzene production.
  Uncertainty: literature
- DOC, Dissolved Organic Carbon [water, surface water]: 1.85185e-6 kg; lognormal variance with pedigree 0.0832, pedigree (2,3,5,5,1)
  Approximated value. Directly taken from nitrobenzene production. Calculated as equal to TOC.
  Uncertainty: literature
- Nitrate [water, unspecified]: 0.2203 kg; lognormal variance with pedigree 0.218, pedigree (4,5,5,5,5)
  Stochiometric value. Represents nitrate ions from neutralized excess nitric acid.
- TOC, Total Organic Carbon [water, surface water]: 1.85185e-6 kg; lognormal variance with pedigree 0.0832, pedigree (2,3,5,5,1)
  Approximated value. Directly taken from nitrobenzene production - calculated by default as TOC (gC) = COD/2.7 (COD measured in g O2). Should more correctly be calculated from the carbon content of the specified emissions to water.
  Uncertainty: literature

## Sampling procedure
see technology

## Extrapolations
see technology and generalComments.
