# heat and power co-generation, lignite

Dataset: EcoSpold 2, unit process
Geography: RoW
Time period: 1980-01-01 to 2022-12-31
Technology level: modern
Classification: EcoSpold01Categories: hard coal/power plants
Classification: ISIC rev.4 ecoinvent: 3510:Electric power generation, transmission and distribution
Synonyms: brown coal; sub-bituminous coal
Tags: lignite power; fossil fuels; coal power
Scenario: Business-as-Usual
System model: Substitution, consequential, long-term
Generated by: Karin Treyer
Published in: Röder, A. 2007
Database: ecoinvent
isCopyrightProtected: true

## General comment
This dataset represents the production of high voltage electricity and district heat in an average combined heat and power lignite power plant on the world in 2012. 'Lignite' is used as representant for 'brown coal', which includes sub-bituminous coal and lignite according to the definition of the IEA electricity information 2014. (IEA. 2014. Electricity Information 2014. ISBN 978-92-64-21692-1. International Energy Agency (IEA), Paris Cedex (FR).)
All exchanges in this dataset except for emissions of SO2, NOx and particles are production-weighted averages of the figures in the datasets in ecoinvent version two, which are valid for the following 10 countries: AT, BA, CZ, DE, ES, FR, HU, PL, SI, SK. The exception values are production-weighted averages of version 2 countries and the new countries in version 3 (AU, CA, CL, ID, IN, KR, MX, MY, PE, RU, TH, TR, TW, TZ, UA, ZA)
Comments on the inventory data of emissions:
- for the assessment of main characteristics (sulphur and ash content of coal, efficiency of the plant) and CO2 a bottom-up approach has been used. It consists in the collection of information about single plants.
- Halogene emissions have been estimated on the basis of the content of the species in the country-specific coal input mix, assuming average retention rates.
- For CO and particle emissions average values for the former UCTE are included (Union for the Coordination of the Transmission of Electricity, since 2009 replaced by ENTSO-E European Network of Transmission System Operators for Electricity).
- The country specific emissions of N2O depend on the share of DeNOx. - Emissions of trace elements were calculated by means of a formula (CORINAIR) using the ash content in the country-specific coal input mix and average transfer coefficients for coal power plants, taking into account the share of DeSOx installed.
- Emission of uranium and thorium radioactive isotopes were assumed proportional to the corresponding element emitted with particles; the other non-gaseous radioactive isotopes of the uranium and thorium decay chain were assumed proportional to the emitted U-238 or Th-232.
- The emission of gaseous radon and K-40 are taken from the literature.
IEA. 2009. Coal information, 2009 edition. Documentation for beyond 2020 files. International Energy Agency.
European Environment Agency (1991) CORINAIR Inventory; VOC's Default Emission Factors
[This dataset is meant to replace the following datasets:]

## Included activities start
From the constructed lignite power plant ready to produce heat and electricity.

From reception of lignite and operating materials at power plant gate. Functional unit is "1MJ of lignite input to combustion".

## Included activities end
This activity ends with 1MJ of lignite in a combined heat and power power plant.

This dataset includes:
- all operation and maintenance activities and materials of the power plants.

- Particle removal (dedusting of the flue gas)
- Desulfurisation and denitrification. These processes are described in separate modules; it can be decided by changing the values of NOx and SOx retained whether and how much DeNOx and DeSOx are installed.
- Cooling: It is assumed that all plants use wet cooling with a cooling tower. No cooling tower is included in this dataset (will be implemented in future versions)
- Loss of feed water
- Losses from gross electricity production, e.g. for internal use

This dataset doesn't include
- raw materials extraction, decommissioning and waste treatment as these activities are already included in the infrastructure datasets
- transformation of the electricity produced
- The disposal of non-recycled ashes is modelled separately.
- Use of fuel oil for startup, as this can be neglected for lignite power plants because these are run for a long time (2-3 years) without being shut down.

## Technology
POWER PLANT:
Lignite power plant input is a dataset which consists of a mix of 30% 100MW power plant and 70% 500MW power plant. The plants are used for basic load with 6000 hours of operation at full capacity per year. The plants are assumed to operate 200000 hours during its lifetime.

## Time period
The Annual Production Volume is valid for the year 2012.

## Parameters
- efficiency: 0.302 dimensionless; lognormal variance with pedigree 0.003325, pedigree (3,2,1,2,2)
  Literature value/calculated value. Net electrical efficiency based on the lower heating value (LHV).
  For all OECD countries, the IEA Electricity information 2014 provides data for the year 2012 on fuel input (TJ, Net calorific value NCV) and gross electricity production (GWh) as well as heat production (TJ) in tables 8 and 9 for each country for electricity only and Combined Heat and Power (CHP) plants each. Together with the information on own use (see parameter 'losses'), the net electrical efficiency based on the NCV is calculated.
  For all non-OECD countries, data from the IEA Energy balances of non-OECD countries 2014 have been used. These tables do not always provide information on how much of the electricity has been produced in electricity only and in CHP plants, but often give the total value only.
  IEA. 2014. Electricity Information 2014. ISBN 978-92-64-21692-1. International Energy Agency (IEA), Paris Cedex (FR).
  IEA/OECD. 2014. Energy balances of non-OECD countries 2014. International Energy Agency (IEA), Paris Cedex (FR).
  output relative to input (requires additional specification)
- factor: input of MJ for the production of 1 kWh: 11.9205 MJ/kWh; name factor_MJ_kWh; = 1*3.6/efficiency; lognormal variance with pedigree 0.0532, pedigree (4,4,3,4,4)
  Calculated value. 3.6 MJ = 1kWh.
  nan
- fraction, cooling water, to air: 0.0299662 dimensionless; name fraction_CW_to_air; = (WConsumption_EP_HC_recirculatingCS*recirculating_CS_fraction_from_allCS+WConsumption_EP_HC_once_through_andCP_CS*once_through_andCP_CS_fractio_from_allCS)/(WWithdrawal_EP_HC_recirculating_CS*recirculating_CS_fraction_from_allCS+WWithdrawal_EP_HC_once_through_andCP_CS*once_through_andCP_CS_fractio_from_allCS); lognormal variance with pedigree 0.092025, pedigree (4,4,3,2,4)
  Calculated value based on literature value (Scown, 2011 & Floerke, 2009, Future changes of freshwater needs in the electricity production sector & Stiegel, 2008, Estimating Freshwater Needs to Meet Future Thermoelectric Generation Requirements) (Vionnet, S., Quantis Water Database - Technical Report, 2012).
  nan
- fraction, process water, to air: 0.15 dimensionless; name fraction_PW_to_air; lognormal variance with pedigree 0.092025, pedigree (4,4,3,2,4)
  Literature value. In case when no industry/process specific data are available, default evaporation fraction value is used. This value is 15% and is based on literature (Statistics Canada, 2007 & Shaffer, K.H., 2008, Consumptive water use in the Great Lakes Basin, USGS & Shiklomanov, 2003, World Water Resources at the Beginning of the 21st Century) and has been approved by an expert.
  nan
- fraction, water, completely softened, to air: 0.15 dimensionless; name fraction_WCS_to_air; = fraction_PW_to_air; lognormal variance with pedigree 0.092025, pedigree (4,4,3,2,4)
  Calculated value. See comment in the other parametres present in this dataset. Water, completely softened is considered to be always used as process water, thus process water fractions to air are applied to all water, completely softened input flows to calculate the amount of water consumed in the processes.
  nan
- fraction, water, decarbonised, to air: 0.0299662 dimensionless; name fraction_WDC_to_air; = fraction_CW_to_air; lognormal variance with pedigree 0.092025, pedigree (4,4,3,2,4)
  Calculated value. See comments in the other parametres present in this dataset. Decarbonised water is considered to be always used as cooling water, thus cooling water fractions to air are applied to all carbonised water input flows to calculate the amount of water consumed in the processes.
  nan
- gross electricity production: 1.54313e11 kWh; name gross_electricity; lognormal variance with pedigree 0.001225, pedigree (2,1,1,2,1)
  Literature value/statistics. Taken from the IEA electricity information 2014.
  IEA. 2014. Electricity Information 2014. ISBN 978-92-64-21692-1. International Energy Agency (IEA), Paris Cedex (FR).
  nan
- losses from gross electricity production: 0.07 dimensionless; name losses_gross_net; lognormal variance with pedigree 0.017225, pedigree (4,3,1,2,3)
  Literature value. Own use of electricity plants in this country in 2012. The default loss as described by the IEA in the electricity statistic is applied, which is 0.07 (IEA electricity information 2014: The difference between gross and net electricity production is generally observed to be about 7% for conventional thermal stations, 1% for hydro stations and 6% for nuclear.)
  IEA. 2014. Electricity Information 2014. ISBN 978-92-64-21692-1. International Energy Agency (IEA), Paris Cedex (FR).
  nan
- once-through and cooling pond cooling systems as a fraction of all cooling syste: 0.625 dimensionless; name once_through_andCP_CS_fractio_from_allCS; lognormal variance with pedigree 0.092025, pedigree (4,4,3,2,4)
  Calculated as an average of data available for Europe (Floerke, 2008, Future changes of freshwater needs in the electricity production sector) and USA (NERL, 2011, Estimating freshwater needs to meet future thermoelectric generation requirements).
  nan
- recirculating cooling system as a fraction of all cooling systems: 0.375 dimensionless; name recirculating_CS_fraction_from_allCS; lognormal variance with pedigree 0.092025, pedigree (4,4,3,2,4)
  (same comment as for once-through and cooling pond cooling systems as a fraction of all coo)
- water consumption, electricity production from hard coal, once-through and cooli: 0.0014 m3/kWh; name WConsumption_EP_HC_once_through_andCP_CS; lognormal variance with pedigree 0.092025, pedigree (4,4,3,2,4)
  Estimated based on literature (Scown, 2011, Water Footprint of U.S. Transportation Fuels, SI). The amount of water consumed while burning lignite and peat is assumed to be the same as in case of coal.
  nan
- water consumption, electricity production from hard coal, recirculating CS: 0.0018 m3/kWh; name WConsumption_EP_HC_recirculatingCS; lognormal variance with pedigree 0.092025, pedigree (4,4,3,2,4)
  (same comment as for water consumption, electricity production from hard coal, once-through)
- water withdrawal, electricity production from hard coal, once-through and coolin: 0.0815 m3/kWh; name WWithdrawal_EP_HC_once_through_andCP_CS; lognormal variance with pedigree 0.092025, pedigree (4,4,3,2,4)
  Estimated based on literature (Scown, 2011, Water Footprint of U.S. Transportation Fuels, SI). The amount of water withdrawn while burning lignite and peat is assumed to be the same as in case of coal.
  nan
- water withdrawal, electricity production from hard coal, recirculating CS: 0.0021 m3/kWh; name WWithdrawal_EP_HC_recirculating_CS; lognormal variance with pedigree 0.092025, pedigree (4,4,3,2,4)
  (same comment as for water withdrawal, electricity production from hard coal, once-through )

## Reference product
- heat, district or industrial, other than natural gas: 1 MJ; By-product classification allocatable product; CPC 17300: Steam and hot water
  Literature value/calculated value. Net thermal efficiency based on the lower heating value (LHV).
  For all OECD countries, the IEA Electricity information 2014 provides data for the year 2012 on fuel input (TJ, Net calorific value NCV) and gross electricity production (GWh) as well as heat production (TJ) in tables 8 and 9 for each country for electricity only and Combined Heat and Power (CHP) plants each. Together with the information on own use (see parameter 'losses'), the net electrical efficiency based on the NCV is calculated.
  For all non-OECD countries, data from the IEA Energy balances of non-OECD countries 2014 have been used. These tables do not always provide information on how much of the electricity has been produced in electricity only and in CHP plants, but often give the total value only.
  IEA. 2014. Electricity Information 2014. ISBN 978-92-64-21692-1. International Energy Agency (IEA), Paris Cedex (FR).
  IEA/OECD. 2014. Energy balances of non-OECD countries 2014. International Energy Agency (IEA), Paris Cedex (FR).
  production volume 4.73216e11 MJ
    Literature value/statistics. Taken from the IEA electricity information 2014. The global value is the sum of all lignite CHP datasets in ecoinvent.
    IEA. 2014. Electricity Information 2014. ISBN 978-92-64-21692-1. International Energy Agency (IEA), Paris Cedex (FR).
  property exergy 0.1842 MJ
    This exergy property is based on the exergy content of the product.
  property price 0.0106 EUR2005
    Average European district heat price from Ecoheatcool and Euroheat 2005-2006, Ecoheat Work package 1: The European heat market. Final report. 10.6 EUR/GJ i s the price of district heat. http://www.solarthermalworld.org/files/Ecoheatcool%20WP1%20Web.pdf?download
  properties: carbon allocation 0 kg, carbon content 0, corresponding fuel use, propane, furnace >100kW 0 MJ, heating value, net 1 MJ, true value relation 0.1842

## Inputs from technosphere
- NOx retained, by selective catalytic reduction: 0.00167318 kg; name nox_retained; = 0.00219397*(efficiency/3.6); source Itten R. 2012; lognormal variance with pedigree 0.093, pedigree (4,4,5,5,4)
  Calculated value. Weighted average from all figures from countries in ecoinvent version 2 (AT, FR, BA, BG, CS, CZ, DE, ES, GR, HU, MK, PL, RO, SI, SK) and the new countries for version 3 (AU, CA, ID, IN, RU, TH, TR, TW, UA). Weighting was made with net electricity production 2008 in these countries (Itten&Frischknecht 2012).
  properties: dry mass 1 kg, wet mass 1 kg
- SOx retained, in lignite flue gas desulfurisation: 0.00671111 kg; name sox_retained; = 0.0088*(efficiency/3.6); source Itten R. 2012; lognormal variance with pedigree 0.093, pedigree (4,4,5,5,4)
  (same comment as for NOx retained, by selective catalytic reduction)
  properties: dry mass 1 kg, wet mass 1 kg
- chlorine, liquid: 9.09091e-5 kg; lognormal variance with pedigree 0.140025, pedigree (5,4,5,2,3)
  Rough guess
- electricity, high voltage: -0.000580444, -0.00048111, -0.0101378, -0.000127295, -0.00163053, -0.00182061, -0.000691101, -0.000298525, -0.000319898, -0.00621665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 kWh (72 suppliers, which the file names only by identifier); sum of these -0.762626 kWh; = efficiency/3.6
  Electricity output per MJ of hard coal burned.
  production volume
    Calculated value
  properties: exergy 3.6 MJ, price 0.0977 EUR2005
  note on exergy: This exergy property is based on the exergy content of the product.
- lignite: 0.0752422, 0.897485 kg (2 suppliers, which the file names only by identifier); sum of these 0.972727 kg; lognormal variance with pedigree 0.0532, pedigree (3,3,5,5,3)
  Literature value/calculated value. Lignite mass needed for burning 1MJ of lignite. Weighted average with electricity production data (Itten&Frischknecht 2012) and values of 10 countries
  (AT, BA, CZ, DE, ES, FR, HU, PL, SI, SK) (Röder et al. 2007)
  Source:
  Itten R. and Frischknecht R. (2012) Life Cycle Inventories of Electricity Mixes and Grid. ESU-services Ltd., Uster, Switzerland.
  properties: carbon content, fossil 0.655, dry mass 0.42 kg, heating value, net 8.8 MJ, water content 1.38095, wet mass 1 kg
  note on carbon content, fossil: C content of dry lignite is 58-73% (specified in Tab 1.1, report 6, part VI). A mean content of 0.655 kg C/kg dry lignite was considered.
  note on heating value, net: Based on literature, page 52, Dones R., Bauer C., Bolliger R., Burger B., Faist Emmenegger M., Frischknecht R., Heck T., Jungbluth N., Röder A., Tuchschmid M. (2007) Life Cycle Inventories of Energy Systems: Results for Current Systems in Switzerland and other UCTE Countries. ecoinvent report No. 5. Paul Scherrer Institut Villigen, Swiss Centre for Life Cycle Inventories, Dübendorf, CH.
- lignite ash: -0.133627, -9.68363e-6 kg (2 suppliers, which the file names only by identifier); sum of these -0.133636 kg; source Röder, A. 2007, p. Tab. 9.69, p.165; lognormal variance with pedigree 0.0926, pedigree (5,3,3,5,3)
  Literature value/calculated value. Ash remaining when burning 1MJ of lignite. Weighted average with electricity production data (Itten&Frischknecht 2012) and ash values 10 countries
  (AT, BA, CZ, DE, ES, FR, HU, PL, SI, SK). These values were valid for the ash being disposed off. Now, total amount of ash has been calculated (disposed+recycled) with the data in Tab. 9.69 p. 165 in Röder et al. 2007. Country ash values calculated from mass balance. Globally, 6% of the lignite ash are recycled, 94% go to disposal.
  Source:
  Itten R. and Frischknecht R. (2012) Life Cycle Inventories of Electricity Mixes and Grid. ESU-services Ltd., Uster, Switzerland.
  production volume
    Calculated from the production volume of lignite, burned in power plant in proportion to the respective output amounts.
  properties: dry mass 1 kg, heating value, net 21.7 MJ, wet mass 1 kg
  note on heating value, net: Based on literature, page 52, Report 5: Dones, R., Bauer, C., Bolliger, R., Burger, B., faist Emmenegger, M., Frischknecht, R., Heck, T., Jungbluth, N., Röder, A., Tuchschmid, M. (2007) Life Cycle Inventories of Energy Systems: Resulst for current Systems in Switzerland and other UCTE Countries. ecoinvent report No. 5. Paul Scherrer Institut Villigen, Swiss Centre for Life Cycle Inventories, Dübendorf, CH
- lignite power plant: 7.62626e-12 unit; name lignite_power_plant; = 1/(200000*500*1000)*(efficiency/3.6); source Röder, A. 2007, p. p.99; lognormal variance with pedigree 0.4006, pedigree (5,3,5,5,3)
  Calculated value. At the moment, the lignite power plant input consists of mix of a 100MWe power plant (30%) and a 500MWe power plant (70%).
  For this calculation, 6000 load hours per year are assumed. It is assumed that a total of 200'000h is reached during the lifetime. A capacity of 500MW is taken for the calculation.
- petroleum coke: 0.00126364 kg; name petroleum_coke; lognormal variance with pedigree 0.0046, pedigree (2,1,3,5,1)
  Literature value/calculated value. Petroleum coke use when burning 1MJ of lignite. Weighted average with electricity production data (Itten&Frischknecht 2012) and values of 10 countries
  (AT, BA, CZ, DE, ES, FR, HU, PL, SI, SK) (Röder et al. 2007)
  Source:
  Itten R. and Frischknecht R. (2012) Life Cycle Inventories of Electricity Mixes and Grid. ESU-services Ltd., Uster, Switzerland.
  properties: carbon content, fossil 0.885, dry mass 1 kg, heating value, net 35 MJ, wet mass 1 kg
- residue from cooling tower: -4.5072e-5, -3.82586e-7 kg (2 suppliers, which the file names only by identifier); sum of these -4.54545e-5 kg; lognormal variance with pedigree 0.0752, pedigree (5,3,3,5,2)
  Literature value/calculated value. Amount of resuidue from cooling tower in relation to burning 1MJ of lignite. Weighted average with electricity production data (Itten&Frischknecht 2012) and values of 10 countries
  (AT, BA, CZ, DE, ES, FR, HU, PL, SI, SK).
  Source:
  Itten R. and Frischknecht R. (2012) Life Cycle Inventories of Electricity Mixes and Grid. ESU-services Ltd., Uster, Switzerland.
  production volume
    Calculated from production volume of reference product using the relative outputs.
  properties: carbon content, fossil 0.0544233, dry mass 0.7 kg, water content 0.428571, wet mass 1 kg
- water, completely softened: 0.0545455 kg; name water_completely_softened; lognormal variance with pedigree 0.086, pedigree (4,5,5,5,3)
  Literature value/calculated value. Feed water for the steam circuit lost when burning 1MJ of lignite. Röder et al. 2007, Tab. 9.65 and Tab. 9.66, p. 160f.
  properties: wet mass 1 kg
- water, decarbonised: 0.26514, 0.0337632, 0.41878, 0.00236938, 0.042919, 4.11117e-5, 0.0252648, 0.0130525, 0.49334, 0.00322737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 kg (11 suppliers, which the file names only by identifier); sum of these 1.36364 kg; lognormal variance with pedigree 0.086, pedigree (4,5,5,5,3)
  Literature value/calculated value. Cooling water, decarbonised, for the cooling water circuit lost when burning 1MJ of lignite. Röder et al. 2007, Tab. 9.65 and Tab. 9.66, p. 160f. These tables give an amount of 0.15 kg/MJ burned, which is valid for the assumption of 75% wet cooling and 25% run-through cooling. However, this revised dataset assumes 100% wet cooling.
  properties: wet mass 1 kg

## Inputs from nature
- Water, cooling, unspecified natural origin [natural resource, in water]: 0.486576 m3; name water_cooling_UNO_input; = ((recirculating_CS_fraction_from_allCS*WWithdrawal_EP_HC_recirculating_CS)+(once_through_andCP_CS_fractio_from_allCS*WWithdrawal_EP_HC_once_through_andCP_CS))/11.52*factor_MJ_kWh; lognormal variance with pedigree 0.130025, pedigree (4,4,5,2,4)
  Calculated based on literature data.

## Emissions to nature
- Antimony ion [air, non-urban air or from high stacks]: 4.74545e-9 kg; name antimony; lognormal variance with pedigree 0.7806, pedigree (5,3,5,5,3)
  Literature value/calculated value. Emissions when burning 1MJ of lignite. Weighted average with electricity production data (Itten&Frischknecht 2012) and emission values of 10 countries
  (AT, BA, CZ, DE, ES, FR, HU, PL, SI, SK) (Röder et al. 2007)
  Country emissions values calculated from trace element balance, input uncertain
  Source:
  Itten R. and Frischknecht R. (2012) Life Cycle Inventories of Electricity Mixes and Grid. ESU-services Ltd., Uster, Switzerland.
- Arsenic ion [air, non-urban air or from high stacks]: 2.69091e-8 kg; name arsenic; lognormal variance with pedigree 0.7806, pedigree (5,3,5,5,3)
  (same comment as for Antimony ion)
- Barium II [air, non-urban air or from high stacks]: 1.40909e-7 kg; name barium; lognormal variance with pedigree 0.7806, pedigree (5,3,5,5,3)
  (same comment as for Antimony ion)
- Benzene [air, non-urban air or from high stacks]: 1.97273e-6 kg; name benzene; lognormal variance with pedigree 0.12, pedigree (3,5,5,5,3)
  Literature value/calculated value. Emissions when burning 1MJ of lignite. Weighted average with electricity production data (Itten&Frischknecht 2012) and emission values of 10 countries
  (AT, BA, CZ, DE, ES, FR, HU, PL, SI, SK) (Röder et al. 2007)
  Country emissions values based on literature.
  Source:
  Itten R. and Frischknecht R. (2012) Life Cycle Inventories of Electricity Mixes and Grid. ESU-services Ltd., Uster, Switzerland.
- Benzo(a)pyrene [air, non-urban air or from high stacks]: 1.81818e-12 kg; name benzo_a_pyrene; lognormal variance with pedigree 0.112, pedigree (3,5,5,5,1)
  (same comment as for Benzene)
- Boron [air, non-urban air or from high stacks]: 1.7e-5 kg; name boron; lognormal variance with pedigree 0.7806, pedigree (5,3,5,5,3)
  (same comment as for Antimony ion)
- Bromine [air, non-urban air or from high stacks]: 6.00909e-7 kg; name bromine; lognormal variance with pedigree 0.2126, pedigree (3,3,5,5,3)
  (same comment as for Antimony ion)
- Butane [air, non-urban air or from high stacks]: 1.72727e-7 kg; name butane; lognormal variance with pedigree 0.112, pedigree (3,5,5,5,1)
  (same comment as for Benzene)
- Cadmium II [air, non-urban air or from high stacks]: 6.10909e-9 kg; name cadmium; lognormal variance with pedigree 0.7806, pedigree (5,3,5,5,3)
  (same comment as for Antimony ion)
- Carbon dioxide, fossil [air, non-urban air or from high stacks]: 0.972727 kg; name carbon_dioxide_fossil; lognormal variance with pedigree 0.0526, pedigree (3,3,5,5,3)
  (same comment as for Benzene)
- Carbon monoxide, fossil [air, non-urban air or from high stacks]: 0.000181818 kg; name carbon_monoxide_fossil; lognormal variance with pedigree 0.706, pedigree (3,4,5,5,1)
  (same comment as for Benzene)
- Chromium III [air, non-urban air or from high stacks]: 2.41818e-8 kg; name chromium; lognormal variance with pedigree 0.7806, pedigree (5,3,5,5,3)
  (same comment as for Antimony ion)
- Chromium VI [air, non-urban air or from high stacks]: 2.91818e-9 kg; name chromium_vi; lognormal variance with pedigree 0.5326, pedigree (3,3,5,5,3)
  Literature value/calculated value. Emissions when burning 1MJ of lignite. Weighted average with electricity production data (Itten&Frischknecht 2012) and emission values of 10 countries
  (AT, BA, CZ, DE, ES, FR, HU, PL, SI, SK) (Röder et al. 2007)
  Country emissions values based on range of data.
  Source:
  Itten R. and Frischknecht R. (2012) Life Cycle Inventories of Electricity Mixes and Grid. ESU-services Ltd., Uster, Switzerland.
- Cobalt II [air, non-urban air or from high stacks]: 4.89091e-9 kg; name cobalt; lognormal variance with pedigree 0.7806, pedigree (5,3,5,5,3)
  (same comment as for Antimony ion)
- Copper ion [air, non-urban air or from high stacks]: 6.72727e-8 kg; name copper; lognormal variance with pedigree 0.7806, pedigree (5,3,5,5,3)
  (same comment as for Antimony ion)
- Dinitrogen monoxide [air, non-urban air or from high stacks]: 1.31818e-5 kg; name dinitrogen_monoxide; lognormal variance with pedigree 0.106, pedigree (3,4,5,5,1)
  (same comment as for Benzene)
- Dioxins, measured as 2,3,7,8-tetrachlorodibenzo-p-dioxin [air, non-urban air or from high stacks]: 6.36364e-14 kg; name dioxins; lognormal variance with pedigree 0.372, pedigree (3,5,5,5,1)
  (same comment as for Benzene)
- Ethane [air, non-urban air or from high stacks]: 3.72727e-7 kg; name ethane; lognormal variance with pedigree 0.112, pedigree (3,5,5,5,1)
  (same comment as for Benzene)
- Formaldehyde [air, non-urban air or from high stacks]: 5.27273e-7 kg; name formaldehyde; lognormal variance with pedigree 0.112, pedigree (3,5,5,5,1)
  (same comment as for Benzene)
- Hydrocarbons, aliphatic, alkanes, unspecified [air, non-urban air or from high stacks]: 1.99091e-6 kg; name hydrocarbons_al_al_unspec; lognormal variance with pedigree 0.112, pedigree (3,5,5,5,1)
  (same comment as for Benzene)
- Hydrocarbons, aliphatic, unsaturated [air, non-urban air or from high stacks]: 1.96364e-6 kg; name hydrocarbons_aliphatic_unsaturated; lognormal variance with pedigree 0.112, pedigree (3,5,5,5,1)
  (same comment as for Benzene)
- Hydrochloric acid [air, non-urban air or from high stacks]: 5.13636e-5 kg; name hydrogen_chloride; lognormal variance with pedigree 0.2506, pedigree (5,3,5,5,3)
  (same comment as for Antimony ion)
- Hydrogen fluoride [air, non-urban air or from high stacks]: 1.22727e-5 kg; name hydrogen_fluoride; lognormal variance with pedigree 0.2506, pedigree (5,3,5,5,3)
  (same comment as for Antimony ion)
- Iodine [air, non-urban air or from high stacks]: 4.36364e-7 kg; name iodine; lognormal variance with pedigree 0.2506, pedigree (5,3,5,5,3)
  (same comment as for Antimony ion)
- Lead II [air, non-urban air or from high stacks]: 2.36364e-8 kg; name lead; lognormal variance with pedigree 0.7806, pedigree (5,3,5,5,3)
  (same comment as for Antimony ion)
- Lead-210 [air, non-urban air or from high stacks]: 7.60909e-5 kBq; name lead_210; lognormal variance with pedigree 0.4306, pedigree (5,3,5,5,3)
  (same comment as for Antimony ion)
- Manganese II [air, non-urban air or from high stacks]: 7.69091e-8 kg; name manganese; lognormal variance with pedigree 0.7806, pedigree (5,3,5,5,3)
  (same comment as for Antimony ion)
- Mercury II [air, non-urban air or from high stacks]: 4.91818e-8 kg; name mercury; lognormal variance with pedigree 0.7806, pedigree (5,3,5,5,3)
  (same comment as for Antimony ion)
- Methane, fossil [air, non-urban air or from high stacks]: 9.09091e-6 kg; name methane_fossil; lognormal variance with pedigree 0.106, pedigree (3,4,5,5,1)
  (same comment as for Benzene)
- Molybdenum VI [air, non-urban air or from high stacks]: 1.46364e-8 kg; name molybdenum; lognormal variance with pedigree 0.7806, pedigree (5,3,5,5,3)
  (same comment as for Antimony ion)
- Nickel II [air, non-urban air or from high stacks]: 9.27273e-8 kg; name nickel; lognormal variance with pedigree 0.7806, pedigree (5,3,5,5,3)
  (same comment as for Antimony ion)
- Nitrogen oxides [air, non-urban air or from high stacks]: 0.00172354 kg; name nitrogen_oxides; = 0.00226*(efficiency/3.6); source Itten R. 2012; lognormal variance with pedigree 0.093, pedigree (4,4,5,5,4)
  (same comment as for NOx retained, by selective catalytic reduction)
- PAH, polycyclic aromatic hydrocarbons [air, non-urban air or from high stacks]: 9.09091e-9 kg; name pah; lognormal variance with pedigree 0.372, pedigree (3,5,5,5,1)
  (same comment as for Benzene)
- Particulate Matter, < 2.5 um [air, non-urban air or from high stacks]: 0.00671111 kg; name particulates_lt2_5; = 0.0088*(efficiency/3.6); source Itten R. 2012; lognormal variance with pedigree 0.093, pedigree (4,4,5,5,4)
  (same comment as for NOx retained, by selective catalytic reduction)
- Particulate Matter, > 10 um [air, non-urban air or from high stacks]: 0.000466727 kg; name particulates_gt10; = 0.000612*(efficiency/3.6); source Itten R. 2012; lognormal variance with pedigree 0.093, pedigree (4,4,5,5,4)
  (same comment as for NOx retained, by selective catalytic reduction)
- Particulate Matter, > 2.5 um and < 10um [air, non-urban air or from high stacks]: 0.000793131 kg; name particulates_2_5_to_10; = 0.00104*(efficiency/3.6); source Itten R. 2012; lognormal variance with pedigree 0.093, pedigree (4,4,5,5,4)
  (same comment as for NOx retained, by selective catalytic reduction)
- Pentane [air, non-urban air or from high stacks]: 1.33636e-6 kg; name pentane; lognormal variance with pedigree 0.112, pedigree (3,5,5,5,1)
  (same comment as for Benzene)
- Polonium-210 [air, non-urban air or from high stacks]: 0.000139091 kBq; name polonium_210; lognormal variance with pedigree 0.4306, pedigree (5,3,5,5,3)
  Literature value/calculated value. Emissions when burning 1MJ of lignite. Weighted average with electricity production data (Itten&Frischknecht 2012) and emission values of 10 countries
  (AT, BA, CZ, DE, ES, FR, HU, PL, SI, SK) (Röder et al. 2007)
  Source:
  Itten R. and Frischknecht R. (2012) Life Cycle Inventories of Electricity Mixes and Grid. ESU-services Ltd., Uster, Switzerland.
- Potassium-40 [air, non-urban air or from high stacks]: 2.63636e-5 kBq; name potassium_40; lognormal variance with pedigree 0.4306, pedigree (5,3,5,5,3)
  (same comment as for Polonium-210)
- Propane [air, non-urban air or from high stacks]: 3.18182e-7 kg; name propane; lognormal variance with pedigree 0.112, pedigree (3,5,5,5,1)
  (same comment as for Polonium-210)
- Propene [air, non-urban air or from high stacks]: 1.45455e-7 kg; name propene; lognormal variance with pedigree 0.112, pedigree (3,5,5,5,1)
  (same comment as for Polonium-210)
- Radium-226 [air, non-urban air or from high stacks]: 1.96364e-5 kBq; name radium_226; lognormal variance with pedigree 0.3907, pedigree (3,3,5,3,3)
  (same comment as for Antimony ion)
- Radium-228 [air, non-urban air or from high stacks]: 1.17273e-5 kBq; name radium_228; lognormal variance with pedigree 0.4306, pedigree (5,3,5,5,3)
  (same comment as for Antimony ion)
- Radon-220 [air, non-urban air or from high stacks]: 0.00115455 kBq; name radon_220; lognormal variance with pedigree 0.4306, pedigree (5,3,5,5,3)
  (same comment as for Antimony ion)
- Radon-222 [air, non-urban air or from high stacks]: 0.00204545 kBq; name radon_222; lognormal variance with pedigree 0.4306, pedigree (5,3,5,5,3)
  (same comment as for Antimony ion)
- Selenium IV [air, non-urban air or from high stacks]: 1.11818e-7 kg; name selenium; lognormal variance with pedigree 0.7806, pedigree (5,3,5,5,3)
  (same comment as for Antimony ion)
- Strontium [air, non-urban air or from high stacks]: 1.24545e-7 kg; name strontium; lognormal variance with pedigree 0.7806, pedigree (5,3,5,5,3)
  (same comment as for Antimony ion)
- Sulfur dioxide [air, non-urban air or from high stacks]: 0.0042402 kg; name sulfur_dioxide; = 0.00556*(efficiency/3.6); source Itten R. 2012; lognormal variance with pedigree 0.093, pedigree (4,4,5,5,4)
  Calculated value. Weighted average from all figures from countries in ecoinvent version 2 (AT, FR, BA, BG, CS, CZ, DE, ES, GR, HU, MK, PL, RO, SI, SK) and the new countries for version 3 (AU, CA, ID, IN, RU, TH, TR, TW, UA). Weighting was made with net electricity production 2008 in these countries (Itten&Frischknecht 2012). According to Röder et al. 2007, about 20-60% of the sulfur contained in the coal don't turn into SO2 but can be found in the ash. A factor of 40% is taken into account here.
- Thorium-228 [air, non-urban air or from high stacks]: 6.33636e-6 kBq; name thorium_228; lognormal variance with pedigree 0.4306, pedigree (5,3,5,5,3)
  (same comment as for Antimony ion)
- Thorium-232 [air, non-urban air or from high stacks]: 1e-5 kBq; name thorium_232; lognormal variance with pedigree 0.4306, pedigree (5,3,5,5,3)
  (same comment as for Antimony ion)
- Toluene [air, non-urban air or from high stacks]: 9.90909e-7 kg; name toluene; lognormal variance with pedigree 0.112, pedigree (3,5,5,5,1)
  (same comment as for Benzene)
- Uranium-238 [air, non-urban air or from high stacks]: 1.63636e-5 kBq; name uranium_238; lognormal variance with pedigree 0.4306, pedigree (5,3,5,5,3)
  (same comment as for Antimony ion)
- Vanadium V [air, non-urban air or from high stacks]: 3.06364e-8 kg; name vanadium; lognormal variance with pedigree 0.7806, pedigree (5,3,5,5,3)
  (same comment as for Antimony ion)
- Water [air, unspecified]: 0.0146299 m3; name water_to_air_unspecified; = (water_completely_softened/1000)*fraction_WCS_to_air+(water_decarbonised_user/1000)*fraction_WDC_to_air+water_cooling_UNO_input*fraction_CW_to_air; lognormal variance with pedigree 0.130025, pedigree (4,4,5,2,4)
  Calculated value based on literature values and expert opinion. See comments in the parametres' comment field.
  property fraction, origin: fresh water 0.0487374; name fraction_origin_fresh_water
  property fraction, origin: salt water 0; name fraction_origin_salt_water
  property fraction, origin: unspecified 0.951263; name fraction_origin_unspecified
- Xylene [air, non-urban air or from high stacks]: 8.38182e-6 kg; name xylene; lognormal variance with pedigree 0.112, pedigree (3,5,5,5,1)
  (same comment as for Benzene)
- Zinc II [air, non-urban air or from high stacks]: 1.58182e-7 kg; name zinc; lognormal variance with pedigree 0.7806, pedigree (5,3,5,5,3)
  (same comment as for Antimony ion)
- Water [water, unspecified]: 0.473365 m3; name water_to_water_unspecified; = (water_completely_softened/1000)*(1-fraction_WCS_to_air)+(water_decarbonised_user/1000)*(1-fraction_WDC_to_air)+water_cooling_UNO_input*(1-fraction_CW_to_air); lognormal variance with pedigree 0.130025, pedigree (4,4,5,2,4)
  (same comment as for Water)
  property fraction, origin: fresh water 0.0437175; name fraction_origin_fresh_water_Ww
  property fraction, origin: salt water 0; name fraction_origin_salt_water_Ww
  property fraction, origin: unspecified 0.956282; name fraction_origin_unspecified_Ww

## Sampling procedure
literature and statistics

## Extrapolations
Most of the exchanges were extrapolated through production-weighted averages of the datasets of the following 10 countries: AT, BA, CZ, DE, ES, FR, HU, PL, SI, SK.

## Review by Carl Vadenbo 2015-07-02
The update of the whole electricity sector for the ecoinvent v3.2 database consist of hundreds of datasets. All these datasets have passed through a streamlined review processes where the underlying modelling of production volumes, technology shares and efficiencies was reviewed in detail prior to the datasets being submitted to the database.
