# smelting and refining of nickel concentrate, 16% Ni

Dataset: EcoSpold 2, unit process
Geography: GLO
Time period: 2010-01-01 to 2022-12-31
Technology level: current
Classification: ISIC rev.4 ecoinvent: 2420:Manufacture of basic precious and other non-ferrous metals
Scenario: Business-as-Usual
System model: Substitution, consequential, long-term
Generated by: Catherine Reid
Published in: Althaus H.-J. 2004
Database: ecoinvent
isCopyrightProtected: true

## General comment
This dataset represents the joint smelting and refining of 1 kg of nickel, 99.5% and 0.243 kg of copper, the former being the reference product. Rough estimate extrapolated from Nickel, 99.5%, at plant dataset (ecoinvent v2.2), representing a global technology of 1994. This dataset is created only to complete Mining and benefication of nickel ore, QC dataset in order to provide a useful product (nickel). The amount of copper refined is calculated based on concentrate caracterisation (see dataset Mining and benefication of nickel ore, QC/GLO). Concerning the other metals in the concentrate (Co, AU, AG, Pt, Pd, Rh; see mining and benefication of nickel ore, QC dataset), since the dataset used for the extrapolation only produced Ni and Cu, no information are avalaible at that time to estimate the inputs associated with the refining of other metals.

## Included activities start
From the reception of nickel concentrate.

## Included activities end
This activity ends with a world-share representative mix of refining steps (such as carbonyl refining, electrowinning, and reduction with hydrogen), at the factory. The dataset includes a world-share representative mix of pyrometallurgical steps (roasting, smelting and converting) and hydrometallurgical steps.

## Geography
Extrapolated from a global nickel production dataset.

## Technology
Extrapolated from a typical technology for smelting and refining of nickel ore.
MINING:
95% of sulphidic nickel ores are mined underground in depths between 200m and 1800m, the ore is transferred to the beneficiation. Widening of the tunnels is mainly done by blasting. The overburden – material, which does not contain PGM-bearing ore – is deposed off-site and is partially refilled into the tunnels.
Emissions: The major emissions are due to mineral born pollutants in the effluents. The underground mining operations generate roughly 80 % of the dust emissions from open pit operations, since the major dust sources do not take place underground. Rain percolate through overburden and accounts to metal emissions to groundwater.
Waste: Overburden is deposed close to the mine. Acid rock drainage occurs over a long period of time.
BENEFICIATION:
After mining, the ore is first ground. In a next step it is subjected to gravity concentration to separate the metallic particles from the PGM-bearing minerals. After this first concentration step, flotation is carried out to remove the gangue from the sulphidic minerals. For neutralisation lime is added. In the flotation several organic chemicals are used as collector, frother, activator, depressor and flocculant. Sometimes cyanide is used as depressant for pyrite. Tailings usually are led to tailing heaps or ponds. As a result, nickel concentrates containing 7 - 25% Ni are produced.
Emissions: Ore handling and processing produce large amounts of dust, containing PM10 and several metals from the ore itself. Flotation produce effluents containing several organic agents used. Some of these chemicals evaporate and account for VOC emissions to air. Namely xanthates decompose hydrolytically to release carbon disulphide. Tailings effluent contains additional sulphuric acid from acid rock drainage.
Waste: Tailings are deposed as piles and in ponds. Acid rock drainage occurs over a long period of time.
METALLURGY AND REFINING:
There are many different process possibilities to win the metal. The chosen process depends on the composition of the ore, the local costs of energy carrier and the local legislation. Basically two different types can be distinguished: the hydrometallurgical and the pyrometallurgical process, which paired up with the refining processes, make up five major production routes (See Tab.1). All this routes are covered, aggregated according to their market share in 1994.

Pyrometallurgy. The pyrometallurgical treatment of nickel concentrates includes three types of unit operation: roasting, smelting, and converting. In the roasting step sulphur is driven off as sulphur dioxide and part of the iron is oxidised. In smelting, the roaster product is melted with a siliceous flux which combines with the oxidised iron to produce two immiscible phases, a liquid silicate slag which can be discarded, and a solution of molten sulphides which contains the metal values. In the converting operation on the sulphide melt, more sulphur is driven off as sulphur dioxide, and the remaining iron is oxidised and fluxed for removal as silicate slag, leaving a high-grade nickel – copper sulphide matte. In several modern operations the roasting step has been eliminated, and the nickel sulphide concentrate is treated directly in the smelter.
Hydrometallurgy: Several hydrometallurgical processes are in commercial operation for the treatment of nickel – copper mattes to produce separate nickel and copper products. In addition, the hydrometal-lurgical process developed by Sherritt Gordon in the early 1950s for the direct treatment of nickel sulphide concentrates, as an alternative to smelting, is still commercially viable and competitive, despite very significant improvements in the economics and energy efficiency of nickel smelting technology. In a typical hydrometallurgical process, the concentrate or matte is first leached in a sulphate or chloride solution to dissolve nickel, cobalt, and some of the copper, while the sulphide is oxidised to insoluble elemental sulphur or soluble sulphate. Frequently, leaching is carried out in a two-stage countercurrent system so that the matte can be used to partially purify the solution, for example, by precipitating copper by cementation. In this way a nickel – copper matte can be treated in a two-stage leach process to produce a copper-free nickel sulphate or nickel chloride solution, and a leach residue enriched in copper.
Refining: In many applications, high-purity nickel is essential and Class I nickel products, which include electrolytic cathode, carbonyl powder, and hydrogen-reduced powder, are made by a variety of refining processes. The carbonyl refining process uses the property of nickel to form volatile nickel-carbonyl compounds from which elemental nickel subsides to form granules. Electrolytic nickel refineries treat cast raw nickel anodes in a electrolyte. Under current the anode dissolves and pure nickel deposits on the cathode. This electrorefining process is obsolete because of high energy demand and the necessity of building the crude nickel anode by reduction with coke. It is still practised in Russia. Most refineries recover electrolytic nickel by direct electrowinning from purified solutions produced by the leaching of nickel or nickel – copper mattes. Some companies recover refined nickel powder from purified ammoniacal solution by reduction with hydrogen.
Emissions: In all of the metallurgical steps, sulphur dioxide is emitted to air. Recovery of sulphur dioxide is only economic for high concentrated off-gas. Given that In the beneficiation step, considerable amounts of lime are added to the ore for pH-stabilisation, lime forms later flux in the metallurgical step, and decomposes into CO2 to form calcite. Dust carry over from the roasting, smelting and converting processes. Particulate emissions to the air consist of metals and thus are often returned to the leaching process after treatment. Chlorine is used in some leaching stages and is produced during the subsequent electrolysis of chloride solution. The chlorine evolved is collected and re-used in the leach stage. The presence of chlorine in wastewater can lead to the formation of organic chlorine compounds (AOX) if solvents etc. are also present in a mixed wastewater. VOCs can be emitted from the solvent extraction stages. A variety of solvents are used an they contain various complexing agents to form complexes with the desired metal that are soluble in the organic layer. Metals and their compounds and substances in suspension are the main pollutants emitted to water. The metals concerned are Cu, Ni, Co, As and Cr. Other significant substances are chlorides and sulphates. Wastewater from wet gas cleaning (if used) of the different metallurgical stages are the most important sources. The leaching stages are usually operated on a closed circuit and drainage systems, and are therefore regarded as minor sources.
In the refining step, the combustion of sulphur leads to emissions of SO2. Nitrogen oxides are produced in significant amounts during acid digestion using nitric acid. Chlorine and HCl can be formed during a number of digestion, electrolytic and purification processes. Chlorine is used extensively in the Miller process and in the dissolution stages using hydrochloric acid and chlorine mixtrues respectively. Dust and metals are generally emitted from incinerators and furnaces. VOC can be emitted from solvent extraction processes, while organic compounds, namely dioxins, can be emitted from smelting stages resulting from the poor combustion of oil and plastic in the feed material. All these emissions are subject to abatement technologies and controlling. Large quantities of effluents contain amounts of metals and organic substances.
Waste: Regarding the metallurgical step, several co-products, residues and wastes, which are listed in the European Waste Catalogue, are generated. Some of the process specific residues can be reused or recovered in preliminary process steps (e. g. dross, filter dust) or construction (e. g. cleaned slag). Residues also arise from the treatment of liquid effluents, the main residue being gypsum waste and metal hydroxides from the wastewater neutralisation plant. These residuals have to be disposed, usually in lined ponds. In the refining step, quantities of solid residuals are also generated, which are mostly recycled within the process or sent to other specialists to recover any precious metals. Final residues generally comprise hydroxide filter cakes (ironhydroxide, 60% water, cat I industrial waste).
References:
Kerfoot D. G. E. (1997) Nickel. In: Ullmann's encyclopedia of industrial chemis-try (ed. Anonymous). 5th edition on CD-ROM Edition. Wiley & Sons, London.

## Time period
Extrapolated from a process valid for 1994 to 2003

## Parameters
- fraction, process water, to air: 0.15 dimensionless; name fraction_PW_to_air; lognormal variance with pedigree 0.092025, pedigree (4,4,3,2,4)
  Literature value. In case when no industry/process specific data are available, default evaporation fraction value is used. This value is 15% and is based on literature (Statistics Canada, 2007 & Shaffer, K.H., 2008, Consumptive water use in the Great Lakes Basin, USGS & Shiklomanov, 2003, World Water Resources at the Beginning of the 21st Century) and has been approved by an expert.

## Reference product
- nickel, class 1: 1 kg; name RP_amount; By-product classification allocatable product; CPC 41422: Unwrought nickel; CAS 7440-02-0
  Comment taken from nickel mine operation, sulfidic ore, GLO dataset (ecoinvent v3). Class I Nickel is normally 99.7 % pure or better. Nickel is a silver-white metal. Factors that make nickel and its alloys commercially valuable commodities include strength, corrosion resistance, high ductility, good thermal and electrical conductivity, magnetic characteristics (below 340 °C) and catalytic properties. Nickel is not tarnished by air and is resistant to fluorine (F2) but is attacked by acids (except conc. HNO3). Class I nickel is marketed as cathodes, granules, powder, briquettes and rounds. Primary nickel metal powder is used in many applications including battery manufacture, coin production, welding products, fuel filters, brake linings, catalysts, cutting tools, paints, plastics, electronics, implants, and surface treatments by plasma spraying. Literature value.
  production volume 2.24e8 kg
    Calculated as the amount of nickel produced globally in 2012 (1.11E+09 kg; USGS Minerals Yearbook 2015) minus the amounts of nickel produced by other nickel production activities included in the ecoinvent database.
  property price 12.0741 EUR2005
    Price calculated as 5-year market average (2015-2019; USD/kg; USGS [2020]) and converted to EUR2005 (USD2019/EUR2005 exchange rate: 0.62; Official Data Foundation [2020] and Macrotrends [2020]).
  properties: carbon allocation 0 kg, carbon content 0, carbon content, fossil 0, carbon content, non-fossil 0, dry mass 1 kg, water content 0, water in wet mass 0 kg, wet mass 1 kg

## Inputs from technosphere
- aluminium hydroxide factory: 9.24e-10 unit; source Classen M. 2009; lognormal variance with pedigree 0.52, pedigree (5,5,5,5,5)
  Data from nickel, 99.5% dataset (ecoinvent v2). All the phases but the mining and the beneficiation are accounted.
- ammonia, anhydrous, liquid: 0.00209625, 0.000426501, 0.00406925, 0.0156747, 0.00190662, 0.00900573, 0.00126258, 0.045105, 0.00415341 kg (9 suppliers, which the file names only by identifier); sum of these 0.0837 kg; source Classen M. 2009; lognormal variance with pedigree 0.21, pedigree (5,5,5,5,5)
  (same comment as for aluminium hydroxide factory)
  properties: dry mass 1 kg, wet mass 1 kg
- ammonium sulfate: -0.880594, -0.529789 kg (2 suppliers, which the file names only by identifier); sum of these -1.41038 kg; lognormal variance with pedigree 0.2106, pedigree (5,5,5,5,5)
  The exchange was updated from 'ammonium sulfate, as N' into 'ammonium sulfate' and therefore its amount has been scaled (multiplied) from 0.299 kg by 4.717 kg of 'ammonium sulfate' per kg of 'ammonium sulfate, as N'. Original comment of the exchange is: Value taken from nickel mine operation, sulfidic ore, GLO dataset (ecoinvent v3). Literature value
  production volume
    Calculated from the production volume of reference flow, in proportion to the respective output amounts.
  properties: dry mass 1 kg, price 0.38 EUR2005, wet mass 1 kg
- copper concentrate, sulfide ore: -0.398361 kg; name copper_conc_amount; = 0.243/0.61; lognormal variance with pedigree 0.2106, pedigree (5,5,5,5,5)
  Copper concentrate used as proxy for copper matte. The amount is calculated based on the amount of pure copper produced (0.243 kg, taken from the previous version of this dataset) and assuming that the copper content of the copper matte is 61% (European Copper Institute, 2018).
  Reference:
  European Copper Institute (2018). Copper matte. Retrieved from: https://copperalliance.eu/uploads/2019/04/20180131_copper-matte_csr-1-1-1-2-3-1.pdf (last accessed on the 2019-06-28).
  production volume
    (same comment as for ammonium sulfate)
  properties: dry mass 1 kg, price 0.8402 EUR2005, wet mass 1 kg
- electricity, high voltage: 6.16 kWh; source Classen M. 2009; lognormal variance with pedigree 0.21, pedigree (5,5,5,5,5)
  Data from nickel, 99.5% dataset (ecoinvent v2).
- electricity, high voltage: 4.11 kWh; source Classen M. 2009; lognormal variance with pedigree 0.21, pedigree (5,5,5,5,5)
  (same comment as for aluminium hydroxide factory)
- heat, district or industrial, natural gas: 14.63 MJ; lognormal variance with pedigree 0.22, pedigree (5,5,5,5,5)
  (same comment as for aluminium hydroxide factory)
  properties: heating value, net 1 MJ
- heat, district or industrial, other than natural gas: 28.705 MJ; lognormal variance with pedigree 0.21, pedigree (5,5,5,5,5)
  (same comment as for aluminium hydroxide factory)
  properties: heating value, net 1 MJ
- hydrogen, liquid: 0.000819508, 0.00374049 kg (2 suppliers, which the file names only by identifier); sum of these 0.00456 kg; source Classen M. 2009; lognormal variance with pedigree 0.24, pedigree (5,5,5,5,5)
  (same comment as for aluminium hydroxide factory)
  properties: dry mass 1 kg, heating value, net 120.21 MJ, wet mass 1 kg
- lime, packed: 0.018938, 0.743833, 1.48723 kg (3 suppliers, which the file names only by identifier); sum of these 2.25 kg; lognormal variance with pedigree 0.24, pedigree (5,5,5,5,5)
  (same comment as for aluminium hydroxide factory)
  properties: carbon content, fossil 0.117492, dry mass 0.998 kg, water content 0.00200401, wet mass 1 kg
  note on carbon content, fossil: Table 3.1, ecoinvent v2.2 report 7, part VII, pg 3. MW CaCO3=100, MW MgCO3=84
- nickel concentrate, 16% Ni: 6.44 kg; lognormal variance with pedigree 0.2106, pedigree (5,5,5,5,5)
  Calculated Value based on concentrate caracterisation. Hyp : 97% yield for mettalurgy (ecoinvent)
  properties: dry mass 1 kg, wet mass 1 kg
- nickel smelter slag: -11 kg; name nickel_slag_amount; lognormal variance with pedigree 0.32, pedigree (5,5,5,5,5)
  Value taken from nickel mine operation, sulfidic ore, GLO dataset (ecoinvent v3). Calculated value: Value results from adding ammounts generated in the converter step (3.97E-01 kg ), in the smelting step (10.5 kg), in the electrolysis step (7.48E-02 kg), and in the carbonyl step (6.91E-06 kg). Proxy: 'nickel smelter slag, 0% water' is used as a proxy for airborne dust residues in the wet scrubber.
  production volume
    (same comment as for ammonium sulfate)
  properties: carbon content, fossil 0.00345, dry mass 1 kg, wet mass 1 kg
- non-ferrous metal smelter: 4.61e-11 unit; source Classen M. 2009; lognormal variance with pedigree 0.55, pedigree (5,5,5,5,5)
  (same comment as for aluminium hydroxide factory)
- silica sand: 2.2 kg; source Classen M. 2009; lognormal variance with pedigree 0.24, pedigree (5,5,5,5,5)
  (same comment as for aluminium hydroxide factory)
  properties: dry mass 0.99 kg, water content 0.010101, wet mass 1 kg
- steam, in chemical industry: -4.41209, -0.777907 kg (2 suppliers, which the file names only by identifier); sum of these -5.19 kg; lognormal variance with pedigree 0.1332, pedigree (2,5,3,5,5)
  (same comment as for aluminium hydroxide factory)
  production volume
    Calculated from production volume of reference product using the relative outputs.
  properties: dry mass 1 kg, price 0.015 EUR2005, wet mass 1 kg
- sulfuric acid: -2.14517, -8.90083 kg (2 suppliers, which the file names only by identifier); sum of these -11.046 kg; lognormal variance with pedigree 0.2106, pedigree (5,5,5,5,5)
  Value taken from nickel mine operation, sulfidic ore, GLO dataset (ecoinvent v3).
  production volume
    (same comment as for ammonium sulfate)
  properties: dry mass 1 kg, price 0.063 EUR2005, wet mass 1 kg
- transport, freight, sea, bulk carrier for dry goods: 40.7 metric ton*km; lognormal variance with pedigree 0.33, pedigree (5,5,5,5,5)
  Estimation based on the location of the concentrator (Raglan, QC, Canada), the smelter (Sudbury, Ontario, Canada) and the refiner (Norway). 1) transport between concentrator and smelter : the distance is estimated to 5000 km from Ungava port (QC, Canada) toToronto (Ontario, Canada) and the mass of concentrated transported is 6.44 kg/kg. 2) transport between smelter and refiner : The distance is estimated to 6860 km, which respresent the distance between the port of Toronto (Ontario, Canada) and Oslo (Norway). http://www.searates.com/reference/portdistance The mass transported is supposed to be equivalent to the nickel and copper in the concentrate (1.243 kg/kg).

## Emissions to nature
- Arsenic ion [air, non-urban air or from high stacks]: 6e-6 kg; source Classen M. 2009; lognormal variance with pedigree 0.87, pedigree (5,5,5,5,5)
  (same comment as for aluminium hydroxide factory)
- Carbon dioxide, fossil [air, unspecified]: 0.992 kg; source Classen M. 2009; lognormal variance with pedigree 0.25, pedigree (5,5,5,5,5)
  (same comment as for aluminium hydroxide factory)
- Cobalt II [air, non-urban air or from high stacks]: 3e-5 kg; source Classen M. 2009; lognormal variance with pedigree 0.87, pedigree (5,5,5,5,5)
  (same comment as for aluminium hydroxide factory)
- Copper ion [air, non-urban air or from high stacks]: 4e-5 kg; source Classen M. 2009; lognormal variance with pedigree 0.87, pedigree (5,5,5,5,5)
  (same comment as for aluminium hydroxide factory)
- Dioxins, measured as 2,3,7,8-tetrachlorodibenzo-p-dioxin [air, non-urban air or from high stacks]: 1e-11 kg; source Classen M. 2009; lognormal variance with pedigree 0.26, pedigree (5,5,5,5,5)
  (same comment as for aluminium hydroxide factory)
- Lead II [air, non-urban air or from high stacks]: 3e-5 kg; source Classen M. 2009; lognormal variance with pedigree 0.87, pedigree (5,5,5,5,5)
  (same comment as for aluminium hydroxide factory)
- NMVOC, non-methane volatile organic compounds [air, non-urban air or from high stacks]: 0.0002 kg; source Classen M. 2009; lognormal variance with pedigree 0.26, pedigree (5,5,5,5,5)
  (same comment as for aluminium hydroxide factory)
- Nickel II [air, non-urban air or from high stacks]: 3e-5 kg; source Classen M. 2009; lognormal variance with pedigree 0.87, pedigree (5,5,5,5,5)
  (same comment as for aluminium hydroxide factory)
- Particulate Matter, < 2.5 um [air, non-urban air or from high stacks]: 5e-7 kg; source Classen M. 2009; lognormal variance with pedigree 0.37, pedigree (5,5,5,5,5)
  (same comment as for aluminium hydroxide factory)
- Particulate Matter, > 10 um [air, non-urban air or from high stacks]: 0.0001 kg; source Classen M. 2009; lognormal variance with pedigree 0.42, pedigree (5,5,5,5,5)
  (same comment as for aluminium hydroxide factory)
- Particulate Matter, > 2.5 um and < 10um [air, non-urban air or from high stacks]: 0.0003 kg; source Classen M. 2009; lognormal variance with pedigree 0.6, pedigree (5,5,5,5,5)
  (same comment as for aluminium hydroxide factory)
- Sulfur dioxide [air, non-urban air or from high stacks]: 1.5 kg; source Classen M. 2009; lognormal variance with pedigree 0.26, pedigree (5,5,5,5,5)
  (same comment as for aluminium hydroxide factory)
- Tin ion [air, non-urban air or from high stacks]: 7e-6 kg; source Classen M. 2009; lognormal variance with pedigree 0.87, pedigree (5,5,5,5,5)
  (same comment as for aluminium hydroxide factory)
- Zinc II [air, non-urban air or from high stacks]: 0.0001 kg; source Classen M. 2009; lognormal variance with pedigree 0.87, pedigree (5,5,5,5,5)
  (same comment as for aluminium hydroxide factory)
- Arsenic ion [water, surface water]: 2.36e-7 kg; source Classen M. 2009; lognormal variance with pedigree 1.54, pedigree (5,5,5,5,5)
  Calculated data. Calculation based emissions (kg/m3) on nickel, 99.5% dataset (ecoinvent v2) and effluent of non-mining or benefitiaiton phases on nickel, 99.5% dataset (ecoinvent v2).
- BOD5, Biological Oxygen Demand [water, surface water]: 0.0023 kg; lognormal variance with pedigree 1.54, pedigree (5,5,5,5,5)
  (same comment as for Arsenic ion)
- COD, Chemical Oxygen Demand [water, surface water]: 0.0023 kg; lognormal variance with pedigree 1.54, pedigree (5,5,5,5,5)
  (same comment as for Arsenic ion)
- Cadmium II [water, surface water]: 3.44e-8 kg; source Classen M. 2009; lognormal variance with pedigree 1.54, pedigree (5,5,5,5,5)
  (same comment as for Arsenic ion)
- Chromium III [water, surface water]: 3.65e-7 kg; source Classen M. 2009; lognormal variance with pedigree 1.54, pedigree (5,5,5,5,5)
  (same comment as for Arsenic ion)
- Copper ion [water, surface water]: 6.64e-7 kg; source Classen M. 2009; lognormal variance with pedigree 1.54, pedigree (5,5,5,5,5)
  (same comment as for Arsenic ion)
- DOC, Dissolved Organic Carbon [water, surface water]: 0.000897 kg; lognormal variance with pedigree 1.54, pedigree (5,5,5,5,5)
  (same comment as for Arsenic ion)
- Lead II [water, surface water]: 2.02e-7 kg; source Classen M. 2009; lognormal variance with pedigree 1.54, pedigree (5,5,5,5,5)
  (same comment as for Arsenic ion)
- Mercury II [water, surface water]: 3.65e-9 kg; source Classen M. 2009; lognormal variance with pedigree 1.54, pedigree (5,5,5,5,5)
  (same comment as for Arsenic ion)
- Nickel II [water, surface water]: 2.67e-7 kg; source Classen M. 2009; lognormal variance with pedigree 1.54, pedigree (5,5,5,5,5)
  (same comment as for Arsenic ion)
- TOC, Total Organic Carbon [water, surface water]: 0.000897 kg; lognormal variance with pedigree 1.54, pedigree (5,5,5,5,5)
  (same comment as for Arsenic ion)
- Tin ion [water, surface water]: 3.65e-7 kg; source Classen M. 2009; lognormal variance with pedigree 1.54, pedigree (5,5,5,5,5)
  (same comment as for Arsenic ion)
- Zinc II [water, surface water]: 1.07e-6 kg; source Classen M. 2009; lognormal variance with pedigree 1.54, pedigree (5,5,5,5,5)
  (same comment as for Arsenic ion)

## Sampling procedure
Rough estimation

## Extrapolations
This dataset is mainly based on nickel, 99.5% dataset (v2). Some information were also taken from nickel mine operation, sulfidic ore, GLO (v3) dataset. The uncertainty has been adjusted accordingly.
