# esterification of rape oil

Dataset: EcoSpold 2, unit process
Geography: CH
Time period: 1998-01-01 to 2022-12-31
Technology level: current
Classification: EcoSpold01Categories: biomass/fuels
Classification: ISIC rev.4 ecoinvent: 1920:Manufacture of refined petroleum products
Tags: ConvertedDataset
Scenario: Business-as-Usual
System model: Substitution, consequential, long-term
Share of production covered: 0 %
Generated by: Edgard Gnansounou
Published in: Jungbluth N. 2007
Database: ecoinvent
isCopyrightProtected: true

## General comment
Inventory refers to the production of 1 kg rape rape methyl ester, respectively glycerine, from rape oil. The multioutput-process 'rape oil, in esterification plant' delivers the co-products 'rape methyl ester, at esterification plant' and 'glycerine, from rape oil, at esterification plant'. Economic allocation with allocation factor of 92.9% to rape oil. Allocation of CO2 emissions is done according to carbon balance.
[This dataset was already contained in the ecoinvent database version 2. It was not individually updated during the transfer to ecoinvent version 3. Life Cycle Impact Assessment results may still have changed, as they are affected by changes in the supply chain, i.e. in other datasets. This dataset was generated following the ecoinvent quality guidelines for version 2. It may have been subject to central changes described in the ecoinvent version 3 change report (http://www.ecoinvent.org/database/ecoinvent-version-3/reports-of-changes/), and the results of the central updates were reviewed extensively. The changes added e.g. consistent water flows and other information throughout the database. The documentation of this dataset can be found in the ecoinvent reports of version 2, which are still available via the ecoinvent website. The change report linked above covers all central changes that were made during the conversion process.]

## Included activities end
This process includes the esterification process of oil to methyl ester and glycerine, intermediate storage of the oil and products, treatment of specific wastewater effluents. System boundary is at the esterification plant.

## Geography
Data from biodiesel producers in CH, industrial data

## Technology
Typical rape oil esterification plant designed for rape methyl ester (RME) production (for use in the vehicle fuels market), Swiss context. Rape oil base-catalyzed transesterification (based on industrial data from biodiesel producer in CH).

## Time period
Data from 1998 to 2006, current technology in CH

## Parameters
- fraction, cooling water, to air: 0.244927 dimensionless; name fraction_CW_to_air; lognormal variance with pedigree 0.092025, pedigree (4,4,3,2,4)
  Calculated.
- fraction, process water, to air: 0.244927 dimensionless; name fraction_PW_to_air; lognormal variance with pedigree 0.092025, pedigree (4,4,3,2,4)
  Calculated.
- fraction, tap water, to air: 0.244927 dimensionless; name fraction_TW_to_air; = fraction_PW_to_air; lognormal variance with pedigree 0.092025, pedigree (4,4,3,2,4)
  Calculated.

## Reference product
- fatty acid methyl ester: 1 kg; By-product classification allocatable product; CPC 35491: Biodiesel
  production volume 5.59768e6 kg
    Approx. 2.5-3 kt of vegetable oil were processed to methyl ester in 2004 in CH
    6361000 litres * 0.88 kg/l (Source: http://www.biofuels-platform.ch/en/infos/ch-biodiesel.php)
  property heating value, net 37.2 MJ
    Based on literature, report 17, page 439. Jungbluth, N., Chudacoff, M., Dauriat, A., Dinkel, F., Doka, G., Faist Emmenegger, M., Gnansounou, E., Kljun, N., Schleiss, K., Spielmann, M., Stettler, C., Sutter, J. 2007: Life Cycle Inventories of Bioenergy. ecoinvent report No. 17, Swiss Centre for Life Cycle Inventories, Dübendorf, CH.
  property price 0.817 EUR2005
    Temporary price data. Calculated as 90% of purchasers price based on: 2004 import and export prices (total trades (USD) divided by total weight (kg) in EU27, USA, China, Japan and India) from UN Commodity Trade Statistics Database (http://data.un.org/Explorer.aspxDatabase [Accessed 2 July 2010]). Commodity: 'Veg fats, oils or fractions hydrogenated, esterified'.
  properties: carbon allocation 0.773 kg, carbon content 0.773, carbon content, fossil 0.041, carbon content, non-fossil 0.732, dry mass 1 kg, water content 0, water in wet mass 0 kg, wet mass 1 kg

## Inputs from technosphere
- electricity, medium voltage: 0.0851145 kWh; lognormal variance with pedigree 0.040025, pedigree (1,1,5,2,1)
  Industrial data from biodiesel producer in CH
  Industrial data from biodiesel producer in CH
- glycerine: -0.107999 kg
  production volume
    Approx. 2.5-3 kt of vegetable oil were processed to methyl ester in 2004 in CH
    Calculated relative to RME output (0.108 kg / kg RME)
  properties: carbon content, non-fossil 0.391304, dry mass 1 kg, heating value, net 18 MJ, price 0.792 EUR2005, wet mass 1 kg
  note on carbon content, non-fossil: In Tab 17.4, ecoinvent v2.2 report n 17 C3H8O3. From palm oil
  note on heating value, net: Based on literature, Report 17: Jungbluth, N., Chudacoff, M., Dauriat, A., Dinkel, F., Doka, G., Faist Emmenegger, M., Gnansounou, E., Kljun, N., Schleiss, K., Spielmann, M., Stettler, C., Sutter, J. 2007: Life Cycle Inventories of Bioenergy. ecoinvent report No. 17, Swiss Centre for Life Cycle Inventories, Dübendorf, CH.
- heat, district or industrial, natural gas: 0.0984657 MJ; lognormal variance with pedigree 0.040025, pedigree (1,1,5,2,1)
  (same comment as for electricity, medium voltage)
  properties: heating value, net 1 MJ
- methanol: 0.156069 kg; lognormal variance with pedigree 0.040025, pedigree (1,1,5,2,1)
  (same comment as for electricity, medium voltage)
  properties: carbon content, fossil 0.375, dry mass 1 kg, heating value, net 20 MJ, wet mass 1 kg
  note on heating value, net: Based on literature, page 533, Report 17: Jungbluth, N., Chudacoff, M., Dauriat, A., Dinkel, F., Doka, G., Faist Emmenegger, M., Gnansounou, E., Kljun, N., Schleiss, K., Spielmann, M., Stettler, C., Sutter, J. 2007: Life Cycle Inventories of Bioenergy. ecoinvent report No. 17, Swiss Centre for Life Cycle Inventories, Dübendorf, CH.
- potassium hydroxide: 0.0159844 kg; lognormal variance with pedigree 0.040025, pedigree (1,1,5,2,1)
  Literature data & biodiesel producer
  Literature data & biodiesel producer
  properties: dry mass 0.856 kg, water content 0.168224, wet mass 1 kg
- rape oil, crude: 1.15796 kg; lognormal variance with pedigree 0.0501, pedigree (1,2,5,1,1)
  (same comment as for electricity, medium voltage)
  properties: carbon content, non-fossil 0.776, dry mass 1 kg, heating value, net 23.51 MJ, wet mass 1 kg
  note on carbon content, non-fossil: In Tab 17.4, ecoinvent v2.2 report n 17 In Tab 17.4, ecoinvent v2.2 report n 17
- residual softwood, wet: 5.44657e-7 m3; lognormal variance with pedigree 0.040025, pedigree (1,1,5,2,1)
  Literature data & biodiesel producer
  Literature data & biodiesel producer
  properties: carbon content, non-fossil 0.494, dry mass 450 kg, heating value, net 5962.7 MJ, water content 0.7, wet mass 765 kg
  note on carbon content, non-fossil: In Tab 17.4, ecoinvent v2.2 report n 17 C content of dry mass is 0.494 kgC/kg dry wood (ecoinvent v2.2 report 9)
- tap water: 0.0167941 kg; name tap_water_input; source Sheenhan, J. 1998; lognormal variance with pedigree 0.052625, pedigree (3,3,5,2,1)
  Literature, environmental report
  Calculated based on literature (Sheenhan, J., 18, An Overview of Biodiesel and Petroleum Diesel Life Cycles; Omni Tech International, 2010, Life Cycle Impact of Soybean Production and Soy Industrial Products), (Vionnet, S., Quantis Water Database - Technical Report, 2012). Assumed to have the same water use as 'soybean methyl ester, at esterification plant'. The process starts when refined oil enters the plant. It includes the processes: prepurification, deacidification, transesterification, destilation, etc. It is assumed that 95% of water use is allocated to cooling water and 5% of water is allocated as process water.
  Literature, environmental report
  Calculated based on literature (Sheenhan, J., 18, An Overview of Biodiesel and Petroleum Diesel Life Cycles; Omni Tech International, 2010, Life Cycle Impact of Soybean Production and Soy Industrial Products), (Vionnet, S., Quantis Water Database - Technical Report, 2012). Assumed to have the same water use as 'soybean methyl ester, at esterification plant'. The process starts when refined oil enters the plant. It includes the processes: prepurification, deacidification, transesterification, destilation, etc. It is assumed that 95% of water use is allocated to cooling water and 5% of water is allocated as process water.
  Literature, environmental report
  Calculated based on literature (Sheenhan, J., 18, An Overview of Biodiesel and Petroleum Diesel Life Cycles; Omni Tech International, 2010, Life Cycle Impact of Soybean Production and Soy Industrial Products), (Vionnet, S., Quantis Water Database - Technical Report, 2012). Assumed to have the same water use as 'soybean methyl ester, at esterification plant'. The process starts when refined oil enters the plant. It includes the processes: prepurification, deacidification, transesterification, destilation, etc. It is assumed that 95% of water use is allocated to cooling water and 5% of water is allocated as process water.
  Literature, environmental report
  Calculated based on literature (Sheenhan, J., 18, An Overview of Biodiesel and Petroleum Diesel Life Cycles; Omni Tech International, 2010, Life Cycle Impact of Soybean Production and Soy Industrial Products), (Vionnet, S., Quantis Water Database - Technical Report, 2012). Assumed to have the same water use as 'soybean methyl ester, at esterification plant'. The process starts when refined oil enters the plant. It includes the processes: prepurification, deacidification, transesterification, destilation, etc. It is assumed that 95% of water use is allocated to cooling water and 5% of water is allocated as process water.
  properties: carbon content, fossil 0.00178991, dry mass 0.000337476 kg, water content 2962.17, wet mass 1 kg
  note on carbon content, fossil: In Tab 17.4, ecoinvent v2.2 report n 17 Bicarbonate content is 2.93 mol/m3. CO2 content is 0.1 mol/m3 (ecoinvent v2.2 report 8, Tab 93.1).
- vegetable oil esterification facility: 1.05269e-9 unit; lognormal variance with pedigree 0.3501, pedigree (1,2,5,1,1)
  Calculation, according to feed capacity and lifetime of the plant
  This exchange has an activity link directly to the producing activity because the product is primarily consumed in the same geographical area where it is produced.
- wastewater, average: -0.000253616 m3; name wastewater_output; lognormal variance with pedigree 0.088025, pedigree (5,5,1,2,1)
  Calculation, to close mass balance of process
  Calculation, to close mass balance of process
  production volume
    Calculated from the production volume of rape methyl ester in proportion to the respective output amounts.
  properties: carbon content, non-fossil 0.194039, dry mass 0.346837 kg, mass concentration, TOC 0.1091 kg/m3, mass concentration, calcium 0.039453 kg/m3, mass concentration, chlorine 0.030031 kg/m3, mass concentration, hydrogen 0.013365 kg/m3, mass concentration, nitrogen 0.031015 kg/m3, mass concentration, oxygen 0.069824 kg/m3, mass concentration, sodium 0.06456 kg/m3, mass concentration, sulfur 0.015602 kg/m3, water content 2882.2, wet mass 1000 kg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
  note on carbon content, non-fossil: 0.0673 kg TOC/m3 (Tab A.17, ecoinvent v2.2 report 13_I). TOC was considered as Total Carbon.

## Inputs from nature
- Water, cooling, unspecified natural origin [natural resource, in water]: 0.000319088 m3; name water_cooling_UNO_input; source Sheenhan, J. 1998; lognormal variance with pedigree 0.0593, pedigree (2,3,5,3,3)
  Calculated based on literature (Sheenhan, J., 18, An Overview of Biodiesel and Petroleum Diesel Life Cycles; Omni Tech International, 2010, Life Cycle Impact of Soybean Production and Soy Industrial Products), (Vionnet, S., Quantis Water Database - Technical Report, 2012). Assumed to have the same water use as 'soybean methyl ester, at esterification plant'. The process starts when refined oil enters the plant. It includes the processes: prepurification, deacidification, transesterification, destilation, etc. The process ends when methyl ester leaves the plant. It is assumed that 95% of water use is allocated to cooling water and 5% of water is allocated as process water.
  property carbon content, fossil 0.0104329; name C_content_fossil
  property carbon content, non-fossil 0; name C_content_non_fossil
  property dry mass 0.1101 kg; name DM
  property water content 9081.65; name water_content
  property water in wet mass 999.89 kg; name WWM

## Emissions to nature
- Carbon dioxide, non-fossil [air, urban air close to ground]: 0.453282 kg; lognormal variance with pedigree 0.04, pedigree (1,1,5,1,1)
  Calculation, to close carbon balance
- Water [air, unspecified]: 8.22668e-5 m3; name water_to_air_unspecified; = (tap_water_input/1000)+(water_cooling_UNO_input)-wastewater_output; lognormal variance with pedigree 0.0807, pedigree (2,2,5,1,1)
  Calculated as a difference between water on the input and water on the output.
  property fraction, origin: fresh water 0.05; name fraction_origin_fresh_water
  property fraction, origin: salt water 0; name fraction_origin_salt_water
  property fraction, origin: unspecified 0.95; name fraction_origin_unspecified

## Review by Niels Jungbluth 2006-08-15
Passed.
none

## Review by Emilia Moreno Ruiz 2012-03-16
name change from 'rape methyl ester' to 'vegetable oil methyl ester'
