# nutrient supply from potassium chloride sludge

Dataset: EcoSpold 2, unit process
Geography: GLO
Time period: 2000-01-01 to 2022-12-31
Technology level: current
Classification: ISIC rev.4 ecoinvent: 0161:Support activities for crop production
Scenario: Business-as-Usual
System model: Substitution, consequential, long-term
Generated by: Avraam Symeonidis
Database: ecoinvent
isCopyrightProtected: true

## General comment
This inventory describes the supply of nutrients from ''potassium chloride sludge'' for fertiliser use.

No machinery expenditures or emissions to the environment are considered related to the actual application of this substance on soil during its agricultural use. The purpose of this activity is to connect the production of ''potassium chloride sludge'' with its generic uses as fertiliser. The product ''potassium chloride sludge'' is connected to the generic market for "inorganic potassium fertiliser, as K2O" through this supplying activity. In the agricultural context, ''potassium chloride sludge'' can be used directly as a fertilizer input to crop production, eventually with other chemicals; alternatively, a generic input of "inorganic potassium fertiliser, as K2O" can be used instead, and this will represent the regional consumption mix for his type of nutrient. A way in between is allowed by using the generic input "inorganic potassium fertiliser, as K2O" and link to the activity providing it from a specific chemical.

In all cases, emissions associated to the application of the fertilizer have to be calculated in the crop production activity."

## Included activities start
Activity starting with the application of potassium chloride sludge.

## Included activities end
The activity ends with the provision of K-fertiliser.

## Geography
inventory based on composition of potassium chloride sludge

## Reference product
- potassium chloride sludge: 1 kg; By-product classification Recyclable; CPC 34659: Fertilizers n.e.c.; lognormal variance with pedigree 0.0439, pedigree (2,2,5,5,2)
  production volume 1 kg
  property oxygen content 0.118897
    Oxygen content (on a dry matter basis) of potassium chloride sludge is calculated from the molecular formula of the substance (70% K2O).
  property potassium content 0.581103
    Potassium content (on a dry matter basis) of potassium chloride sludge is calculated from the molecular formula of the substance (70% K2O).
  properties: carbon allocation 0 kg, carbon content 0, carbon content, fossil 0, carbon content, non-fossil 0, dry mass 1 kg, price 0 EUR2005, water content 0, water in wet mass 0 kg, wet mass 1 kg

## Inputs from technosphere
- inorganic potassium fertiliser, as K2O: 0.0266696, 0.00305678, 3.64587e-5, 0.0940597, 0.00327169, 0.00120506, 0.000176537, 0.00223933, 0.00280157, 0.000509463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 kg (30 suppliers, which the file names only by identifier); sum of these 0.7 kg
  The sludge has a K2O content of 70%.
  production volume
    Production volume calculated based on the production volume of potassium chloride sludge that is produced in magnesium production, electrolysis.
  properties: dry mass 1 kg, oxygen content 0.169852, potassium content 0.830148, price 0.188 EUR2005, wet mass 1 kg
  note on oxygen content: Oxygen content (on a dry matter basis) of inorganic potassium fertiliser, as K2O is calculated from the molecular formula of the substance (K2O).
  note on potassium content: Potassium content (on a dry matter basis) of inorganic potassium fertiliser, as K2O is calculated from the molecular formula of the substance (K2O).

## Sampling procedure
Dataset based on nutrient content of ash, from combustion of bagasse from sugar cane for fertiliser use
