# soybean meal and crude oil production

Dataset: EcoSpold 2, unit process
Geography: BR
Time period: 2015-01-01 to 2022-12-31
Technology level: current
Classification: ISIC rev.4 ecoinvent: 1040:Manufacture of vegetable and animal oils and fats
Classification: EcoSpold01Categories: biomass/fuels
Synonyms: soybean oil extraction
Scenario: Business-as-Usual
System model: Substitution, consequential, long-term
Generated by: Eduardo Toshio Sugawara
Database: ecoinvent
isCopyrightProtected: true

## General comment
This dataset represents the operation of a mill with regards the processing of 1 kg of soybeans. The products and respective uses are indicated as follows: 1) crude oil: further refined to become edible or used as it is to produce biodiesel; 2) meal and hulls that are consumed as animal feed. Lecithin that is used as an emulsifier in the food industry is also reported as a third product in one literature, but its was disregarded as its amount represents less than 1% of total outputs and no economic market value for it was found.
Although no primary data was obtained from producers, secondary data used in this dataset represents the general industrial process of most Brazilian mills (oil obtained via combination of mechanical and solvent extraction). Different sources vary mainly in terms of electricity consumption and type of energy feedstock used to supply the boiler. Data used in this dataset represents the average of 3 sources (indicated in the Bibliography); the exception applies to data gaps, in which case information from the existing ecoinvent dataset were adopted.

## Included activities start
This activity starts after the receive of soybean from the field. Following operational processes go from pre-cracking of soybeans through crude oil production.

## Included activities end
System boundary is at the oil mill (gate-to-gate). No further treatment of crude to refined oil is included.

## Geography
Data represents the operation of a general mill in any location of Brazil.

## Technology
Typical oil mill designed for soybean oil production by means of exclusively solvent extraction (includes pre-cracking of soybeans, dehulling, oil extraction and meal processing ). No previous mechanical extraction is included.

## Time period
Time period for the most of the data collected for this dataset.

## Parameters
- fraction of cooling water which evaporates to air: 0.3875 dimensionless; name fraction_CW_to_air
  fraction of cooling water which evaporates to air, i.e. is consumed
- fraction_TW_to_air: 0.4363 dimensionless
- plant, operation hours: 24 hour; name operation_hours_day
  Value reported by Dorsa (2004). 24hours/day
- plant, processing rate: 2000 t/day; name processing_rate
  Value reported by Dorsa (2004). 2,000 t/day
- water consumption in boiler: 60000 kg; name water_consumption_boiler
  Value reported by Dorsa (2004). Consumption per hour (60 m3/hour)

## Reference product
- soybean meal: 1 kg; name soybean_meal_output; By-product classification allocatable product; CPC 21920: Flours and meals of oil seeds or oleaginous fruits, except those of mustard
  EcoSpold01Location=BR
  Average value based on the 3 literatures adopted.
  production volume 4.91842e10 kg
    Calculated from production volume of by-product (soybean oil crude) using the relative outputs.
  property carbon content, non-fossil 0.475627
    Composition data obtained from Table 2 in Uses of Canola Meal, J. Bonnardeaux, Department of Agriculture and Food, Western Australia, 2007. First, composition data were refered to 1 kg dry mass. Then, C-contents were calculated considering a C-content/dry mass of 46% in carbohydrates (including fibres), 53% in proteins and 75% in fats. All data from "Evolutionary and Biochemical Aspects", A.D. Kay and T. Vrede (in Global Ecology, 2010, Elsevier B.V., S.E. Jørgensen Ed.).
  properties: carbon allocation 0.423308 kg, carbon content 0.475627, carbon content, fossil 0, dry mass 0.89 kg, price 0.528626 EUR2005, water content 0.123596, water in wet mass 0.11 kg, wet mass 1 kg

## Inputs from technosphere
- electricity, medium voltage: 0.0713139 kWh; lognormal variance with pedigree 0.0847, pedigree (3,4,5,3,4)
  EcoSpold01Location=BR
  Average value based on the 3 literatures adopted.
  Uncertainty: Based on US study, cross-checking with various literature references, industrial data
- heat, central or small-scale, other than natural gas: 0.424423 MJ; lognormal variance with pedigree 0.0847, pedigree (3,4,5,3,4)
  Average value based on the 3 literatures adopted.
  properties: heating value, net 1 MJ
- heat, district or industrial, other than natural gas: 0.440829 MJ; lognormal variance with pedigree 0.0847, pedigree (3,4,5,3,4)
  Average value based on the 3 literatures adopted.
  properties: corresponding fuel use, propane, furnace >100kW 1.05263 MJ, heating value, net 1 MJ
  note on corresponding fuel use, propane, furnace >100kW: Lower heating value of the fuel input related to the heat/electricity output, taken directly from ecoinvent v3.0 dataset "heat production, natural gas, at industrial furnace >100kW, GLO 2000".
- hexane: 0.00149374 kg; lognormal variance with pedigree 0.0841, pedigree (3,4,5,3,4)
  EcoSpold01Location=RER
  Average value based on the 3 literatures adopted.
  Uncertainty: Based on US study, cross-checking with various literature references, industrial data
  properties: carbon content, fossil 0.837209, dry mass 1 kg, heating value, net 45.02 MJ, wet mass 1 kg
- oil mill: 2.31317e-10 unit; = soybean_oil_crude_output/(22000000*50*0.9); lognormal variance with pedigree 0.51, pedigree (5,5,5,5,5)
  Only original Ecoinvent value available, so it was used to fill this data gap. Calculated relative to lifetime capacity (50 years * 22 million kg oil / year ) with 90% capacity utilisation
  EcoSpold01Location=CH
  Uncertainty: Calculation, according to production capacity and lifetime of the plant
- soybean: 1.24479 kg; lognormal variance with pedigree 0.0841, pedigree (3,4,5,3,4)
  Average value based on the 3 literatures adopted.
  EcoSpold01Location=BR
  Uncertainty: Based on BR studies, cross-checking with various literature references, industrial data
  properties: carbon content, non-fossil 0.524508, dry mass 0.89 kg, water content 0.123596, wet mass 1 kg
  note on carbon content, non-fossil: Composition data obtained from Soybeans, green, raw, in (http://www.nal.usda.gov/fnic/foodcomp/search/). First, composition data were refered to 1 kg dry mass. Then, C-contents were calculated considering a C-content/dry mass of 46% in carbohydrates (including fibres), 53% in proteins and 75% in fats. All data from "Evolutionary and Biochemical Aspects", A.D. Kay and T. Vrede (in Global Ecology, 2010, Elsevier B.V., S.E. Jørgensen Ed.).
- soybean oil, crude: -0.229004 kg; name soybean_oil_crude_output; lognormal variance with pedigree 0.0461, pedigree (3,4,3,3,4)
  EcoSpold01Location=BR
  Average value based on the 3 literatures adopted.
  production volume
    Data from FAO for "oil, soybean" (http://www.fao.org/faostat/en/#data/QCL). The production volume PV for Brazil in 2019 was 11263345 t/year.
  properties: carbon content, non-fossil 0.768, dry mass 1 kg, heating value, net 38.4 MJ, price 1.22147 EUR2005, wet mass 1 kg
  note on heating value, net: Values is approximated from HHV from "vegetable oil, crude". Source: Radovanovic,M.; Zivanovic,T.; Stojiljkovic,D.; Jovanovic,V.; Jerinic,N.; Knezevic,S. et.al. Utilization of sunflower husk as a fuel for industrial boilers - 20 years experience. Proc. 5th Eur. Conf. on Industrial Furnaces&Boilers 2000,vol.2,p.221-233. Available at: https://phyllis.nl/Biomass/View/2152
- tap water: 0.373498 kg; name tap_water_input; lognormal variance with pedigree 0.0852, pedigree (3,4,5,4,4)
  Average value based on the 3 literatures adopted. Refers to the process amount; cooling water is reported separately.
  properties: carbon content, fossil 0.00178991, dry mass 0.000337476 kg, water content 2962.17, wet mass 1 kg
  note on carbon content, fossil: Bicarbonate content is 2.93 mol/m3. CO2 content is 0.1 mol/m3 (ecoinvent v2.2 report 8, Tab 93.1).

## Inputs from nature
- Water, cooling, unspecified natural origin [natural resource, in water]: 0.000896247 m3; name water_cooling_UNO_input; = water_consumption_boiler/1000*operation_hours_day/(processing_rate*1000); source Omni Tech International 2010; lognormal variance with pedigree 0.1227, pedigree (5,4,5,3,4)
  Calculated based on literature (Dorsa, R., 2004. Tecnologia de Óleos Vegetais. Campinas: Ideal). Water consumed in the boiler.

## Emissions to nature
- Hexane [air, urban air close to ground]: 0.00149374 kg; lognormal variance with pedigree 0.1241, pedigree (3,4,5,3,4)
  Emissions are taken to be equal to input of the solvent.
  Uncertainty: Emissions are taken to be equal to input of gas
- Water [air, unspecified]: 0.000510253 m3; = (tap_water_input/1000*fraction_TW_to_air)+(water_cooling_UNO_input*fraction_CW_to_air); lognormal variance with pedigree 0.25, pedigree (5,5,5,5,5)
  Value calculated with the same mathematical relation as the original dataset "Soybean meal and crude oil production, BR 2006". Values of parameters "fraction_TW_to_air" and "fraction_CW_to_air" were also adopted from the original dataset.
- BOD5, Biological Oxygen Demand [water, surface water]: 5.09118e-6 kg; lognormal variance with pedigree 0.1241, pedigree (3,4,5,3,4)
  Data from Zortea (2015). Value after wastewater treatment.
- COD, Chemical Oxygen Demand [water, surface water]: 2.55181e-5 kg; lognormal variance with pedigree 0.25, pedigree (5,5,5,5,5)
  No data related to COD available from the literatures. It was used the recommendations given in the ecoinvent Data Quality Guidelines (item 5.9.7) as follows: BOD5 = 0.2*COD
- DOC, Dissolved Organic Carbon [water, surface water]: 9.43549e-6 kg; lognormal variance with pedigree 0.25, pedigree (5,5,5,5,5)
  No data related to COD available from the literatures. It was used the recommendations given in the ecoinvent Data quality Guidelines (item 5.9.7) as follows: DOC = TOC
- Nitrogen [water, surface water]: 5.62644e-7 kg; lognormal variance with pedigree 0.1241, pedigree (3,4,5,3,4)
- Phosphorus [water, surface water]: 1.59333e-7 kg; lognormal variance with pedigree 0.1241, pedigree (3,4,5,3,4)
- Suspended solids, unspecified [water, surface water]: 4.30696e-6 kg; lognormal variance with pedigree 0.1241, pedigree (3,4,5,3,4)
- TOC, Total Organic Carbon [water, surface water]: 9.43549e-6 kg; lognormal variance with pedigree 0.25, pedigree (5,5,5,5,5)
  No data related to TOC available from the literatures. It was used the recommendations given in the ecoinvent Data Quality Guidelines (item 5.9.7) as follows: COD = 2.7*TOC
- Water [water, unspecified]: 0.000759492 m3; = (tap_water_input/1000)*(1-fraction_TW_to_air)+water_cooling_UNO_input*(1-fraction_CW_to_air); lognormal variance with pedigree 0.25, pedigree (5,5,5,5,5)
  (same comment as for Water)

## Sampling procedure
Data from published sources that reflects the operation of mills in Brazil. No extrapolation to data from another country was used. The sources are indicated as follows:
1) Castanheira, E. G., Grisoli, R., Coelho, S., Silva, G. A., Freire, F., 2015. Life-cycle assessment of soybean-based biodiesel in Europe: comparing grain, oil and biodiesel import from Brazil. J. Clean. Prod. 102, 188-201.
2) Dorsa, R., 2004. Tecnologia de Óleos Vegetais. Campinas: Ideal.
3) Zortea, R. B., 2015. Avaliação da sustentabilidade do biodiesel da soja no Rio Grande do Sul: uma abordagem de ciclo de vida. PhD thesis. Porto Alegre.

## Extrapolations
Dry mass, carbon content and gross calorific value are based on ecoinvent database.

## Review by Jens Lansche 2017-11-24
Review comments considered
