# praseodymium oxide to generic market for mischmetal

Dataset: EcoSpold 2, unit process
Geography: GLO
Time period: 2011-01-01 to 2022-12-31
Technology level: current
Classification: ISIC rev.4 ecoinvent: 0729:Mining of other non-ferrous metal ores
Classification: EcoSpold01Categories: chemicals/inorganics
Scenario: Business-as-Usual
System model: Substitution, consequential, long-term
Generated by: Bo Weidema
Database: ecoinvent
isCopyrightProtected: true

## General comment
This dataset provides an outlet for surplus praseodymium oxide from co-production with other rare earth oxides. This dataset implies an assumption that a surplus will add to the praseodymium content of the general mischmetal (mixed rare earths). This route should be replaced by a dataset representing the marginal application of praseodymium, as soon as this becomes available.

## Included activities start
This linking activity starts from the supply of surplus praseodymium

## Included activities end
ends with the supply of mischmetal

## Technology
This is a linking activity between two markets, without any other activity. It has no other inputs and outputs.

## Reference product
- praseodymium oxide: 1 kg; By-product classification allocatable product; CPC 3429: Compounds of rare earth metals, of yttrium or of scandium; CAS 12036-32-7
  production volume 1 kg
  properties: carbon allocation 0 kg, carbon content 0, carbon content, fossil 0, carbon content, non-fossil 0, dry mass 1 kg, price 0 EUR2005, water content 0, water in wet mass 0 kg, wet mass 1 kg

## Inputs from technosphere
- mischmetal: 1 kg
  production volume
    Total rare earth produced in the world in 2005 was 122 000 ton REO eq (Table 6 in http://minerals.usgs.gov/minerals/pubs/commodity/rare_earths/myb1-2007-raree.xls). Rare-earth production in China accounts then for 98% of the world’s production, so the same assumptions have been applied for calculating global production volumes as for calculating chinese production volumes. It is estimated, that 10% of this production volume is traded on the generic market for mischmetal.
  properties: dry mass 1 kg, price 619.06 EUR2005, wet mass 1 kg
