# platinum group metal mine operation, ore with high palladium content

Dataset: EcoSpold 2, unit process
Geography: RU
Time period: 1995-01-01 to 2022-12-31
Technology level: current
Classification: ISIC rev.4 ecoinvent: 0729:Mining of other non-ferrous metal ores
Synonyms: platinumgroup metal
Tags: ConvertedDataset
Scenario: Business-as-Usual
System model: Substitution, consequential, long-term
Share of production covered: 23 %
Generated by: Mischa Classen
Published in: Althaus H.-J. 2004
Database: ecoinvent
isCopyrightProtected: true

## General comment
This dataset describes the joint production of 0.73 kg of palladium, 3200 kg of copper, 2310 kg of nickel, 99.5%, 0.25 kg of platinum, and 0.02 kg of rhodium, in the Russian Federation in 2002. Palladium is the reference product, and all the remaining are byproducts. The module is designed for the use of the metal in technical systems, where it plays a minor role like the use in manufacturing of electronic or technical chemistry using certain catalysts. It is not to be used if the impact of the PGM within the modelled process in scope is considered to be high. In such cases, a more detailed analysis depending on scope and allocation procedures has to be conducted. The data used is mainly based on a LCA study for autocatalysts in Germany.

## Included activities start
Mining process starting from ores, in ground.

## Included activities end
The activity ends with the refining of PGM containing dross, at an external refining facility.

The dataset includes the beneficiation of the ore, the metallurgy of the ore, the separation of non-ferrous metals, the production of most agents used in beneficiation and metallurgy, the production infastructure for mining and metallurgy, and the disposal of overburden, tailings and slags.

The dataset doesn't include the handling of acid rock drainage from overburden and sulfidic tailings, nor the non-production infrastructure (such as buildings), nor the transport of mined ore from mining to beneficiation sites.

## Geography
Some agents used like lime or sodium cyanide originate from data sets valid for Switzerland or Europe. Processes like blasting and transport originate from data sets valid for Switzerland or Europe.

## Parameters
- fraction, process water, to air: 0.15 dimensionless; name fraction_PW_to_air; lognormal variance with pedigree 0.092025, pedigree (4,4,3,2,4)
  Literature value. In case when no industry/process specific data are available, default evaporation fraction value is used. This value is 15% and is based on literature (Statistics Canada, 2007 & Shaffer, K.H., 2008, Consumptive water use in the Great Lakes Basin, USGS & Shiklomanov, 2003, World Water Resources at the Beginning of the 21st Century) and has been approved by an expert.

## Reference product
- palladium: 1 kg; source Hochfeld C. 1997; By-product classification allocatable product; CPC 4160: Other non-ferrous metals and articles thereof (including waste and scrap of some metals); cermets and articles […]; CAS 7440-05-3
  Palladium is silvery-white in colour, just like platinum. Its melting point is the lowest of all PMG, but it is still high compared to other popular metals. It is also the least dense of the PMGs. It has also high temperature stability and corrosion resistance. The rarest of all PGMs apart from iridium, palladium is also a good oxidation catalyst, conductive, oxidation resistant and ductile when annealed.
  Palladium has the ability to absorb big amounts of hydrogen. This makes it an efficient and safe hydrogen storage medium and purifier. It is also used in chemical processes that require hydrogen exchange between two reactants, such as that which produces butadiene and cyclohexane, the raw materials for synthetic rubber and nylon.
  Palladium's catalytic qualities make it necessary in catalytic converters and air purification equipment. Its chemical stability and electrical conductivity lead to more effective and durable plating than using gold in electronic components.
  Literature value.
  production volume 84680 kg
    81 t / a
    Calculated relative to Pt output. This amounts to 85% of Pd output in Russia in 2005 (97400 kg)
  property price 5640 EUR2005
    Temporary price data. Calculated as 90% of purchasers price based on: 2004 price from USGS (2007) Mineral commodity summaries 2007. <http://minerals.usgs.gov/minerals/pubs/mcs/2007/mcs2007.pdf> [Accessed 25 May 2010]
  properties: carbon allocation 0 kg, carbon content 0, carbon content, fossil 0, carbon content, non-fossil 0, dry mass 1 kg, water content 0, water in wet mass 0 kg, wet mass 1 kg

## Inputs from technosphere
- blasting: 0.0615068 kg; source Hochfeld C. 1997; lognormal variance with pedigree 0.0601, pedigree (3,2,5,1,3)
  Literature value.
- chemical factory, organics: 5.47945e-10 unit; lognormal variance with pedigree 0.4301, pedigree (4,2,5,5,4)
  Estimation from dataset author.
- chemical, inorganic: 5767.12 kg; source IPPC 2002; lognormal variance with pedigree 0.16, pedigree (1,1,5,1,1)
  Calculated value: Total consumption values result from the addition of the consumption values of the following steps: Beneficiation and metallurgy.
  BENEFICIATION: 69.1 kg
  Modelled, based on “ISIC 0729” - pdf-document on the dedicated talk page of ecoinvent (www.ecoinvent.org/documentation)
  See part: Regarding “platinum group metal mine operation, ore with high palladium content, RU 2002” dataset; section 'Beneficiation'.
  METALLURGY: 4140 kg
  Further references: Hochfeld C. (1997) Bilanzierung der Umweltauswirkungen bei der Gewinnung von Platingruppen-Metallen für PKW-Abgaskatalysatoren. In: Werkstattreihe, Vol. 101. Öko-Institut, Freiburg i. Breisgau.
  properties: carbon content, fossil 0.003, dry mass 1 kg, wet mass 1 kg
  note on carbon content, fossil: This dataset is an unweighted average of 20 inorganic substances (listed in Tab 88.1, ecoinvent v2.2 report 8, part II), being part of the top100 chemicals included in this database. The C-content has also been calculated as an unweighted average of the C content of the substances composing this dataset.
- chemical, organic: 27.8082 kg; source IPPC 2002; lognormal variance with pedigree 0.16, pedigree (1,1,5,1,1)
  Modelled, based on “ISIC 0729” - pdf-document on the dedicated talk page of ecoinvent (www.ecoinvent.org/documentation)
  See part: Regarding “platinum group metal mine operation, ore with high palladium content, RU 2002” dataset; section 'Beneficiation'.
  properties: carbon content, fossil 0.628, dry mass 1 kg, heating value, net 19.03 MJ, wet mass 1 kg
  note on carbon content, fossil: This dataset is an unweighted average of 20 organic substances (listed in Tab 88.1, ecoinvent v2.2 report 8, part II), being part of the top100 chemicals included in this database. The C-content has also been calculated as an unweighted average of the C content of the substances composing this dataset.
- conveyor belt: 0.00272603 m; source Hochfeld C. 1997; lognormal variance with pedigree 0.4421, pedigree (5,4,5,3,5)
  Estimation: conveyor belts are 2000 m long,and have a capacity of 2000 t / h. This yields 2*10-5 m conveyor belt required per tonne mined raw ore.
- copper, cathode: -4383.56 kg; source Hochfeld C. 1997
  Literature value.
  production volume
    81 t / a
    Calculated relative to Pt output. This amounts to 56% of Cu output in Russia in 2005 (664 million kg)
  properties: dry mass 1 kg, price 3.57105 EUR2005, wet mass 1 kg
- diesel, burned in building machine: 9452.05 MJ; source Hilbrans H. 1999; lognormal variance with pedigree 0.138625, pedigree (4,3,5,2,4)
  Estimation: The mobile equipment used for exploration like drilling machines, scoop trams and underground trucks is inventoried assessing a standard value for diesel, burned in building machine, i. e. 69.2 kJ per tonne mined raw ore.
  properties: heating value, net 1 MJ
- electricity, medium voltage: 36027.4 kWh; source Hochfeld C. 1997; lognormal variance with pedigree 0.0601, pedigree (3,2,5,1,3)
  Calculated value: Total electricity consumption values result from the addition of the consumption values of the following steps: Mining, beneficiation, metallurgy, separation of non-ferrous metals and refining.
  MINING: 7.48E03 KWh
  Estimation: The supply mix of the mining operations are estimated to be similar to that of the aluminum industry.
  BENEFICIATION: 1.18E03 KWh
  Estimation: Electricity production mix for the UCTE is chosen.
  METALLURGY: 1.16E04 KWh.
  SEPARATION: 5.56E03 KWh.
  REFINING: 4.59E02 KWh
  Extrapolation: Value corresponds to medium voltage electricity consumption from dataset 'platinum group metal mine operation, ore with high rhodium content, ZA 2002'.
- heat, district or industrial, natural gas: 50794.4, 118384 MJ (2 suppliers, which the file names only by identifier); sum of these 169178 MJ; source Hochfeld C. 1997; lognormal variance with pedigree 0.0407, pedigree (2,2,5,1,1)
  Calculated value: Total gas consumption values result from the addition of the consumption values of the following steps: Metallurgy and refining.
  METALLURGY: 1.25E05 MJ
  REFINING: 776 MJ
  Extrapolation: Value corresponds to heat from natural gas consumption from dataset 'platinum group metal mine operation, ore with high rhodium content, ZA 2002'.
  properties: heating value, net 1 MJ
- hydrogen cyanide: 2.36992, 1.95885 kg (2 suppliers, which the file names only by identifier); sum of these 4.32877 kg; source IPPC 2002; lognormal variance with pedigree 0.16, pedigree (1,1,5,1,1)
  (same comment as for chemical, organic)
  properties: carbon content, fossil 0.444444, dry mass 1 kg, heating value, net 17.95 MJ, wet mass 1 kg
- lime, packed: 81.7511, 163.454 kg (2 suppliers, which the file names only by identifier); sum of these 245.205 kg; source Krauss U. 1999; lognormal variance with pedigree 0.16, pedigree (1,1,5,1,1)
  Estimation: The value for lime - geometric mean - is taken from copper mining where a range from 1 to 4 kg per tonne sulphidic ore is recommended.
  Further references: IPPC (2002) Integrated Pollution Prevention and Control (IPPC); Draft Reference Document on Best Available Techniques for Management of Tailings and Waste-Rock in Mining Activities. European Commission. Retrieved at 01.03.2003 from http://www.jrc.es/pub/english.cgi/0/733169
  properties: carbon content, fossil 0.117492, dry mass 0.998 kg, water content 0.00200401, wet mass 1 kg
  note on carbon content, fossil: Table 3.1, ecoinvent v2.2 report 7, part VII, pg 3. MW CaCO3=100, MW MgCO3=84
- mine infrastructure, underground, non-ferrous metal: 6.83562e-6 unit; lognormal variance with pedigree 0.3601, pedigree (3,2,5,1,3)
  Estimation from dataset author: Mine has a lifetime of 50 years. --> 400 000 t / year --> 5E-11 units / kg ore mined.
- nickel smelter slag: -56849.3 kg; source Hochfeld C. 1997; lognormal variance with pedigree 0.001, pedigree (2,2,2,3,1)
  Calculated value: Total slag generation value results from the addition of generation values of the following steps: Metallurgy and separation of non-ferrous metals.
  METALLURGY: 41 400 kg
  Estimation: Value includes dross from separation of non-ferrous metals step.
  SEPARATION: 63.5 kg
  Prosy: 'nickel smelter slag, 0% water' is used as a proxy for Dross.
  production volume
    Calculated from the production volume of palladium in proportion to the respective output amounts.
  properties: carbon content, fossil 0.00345, dry mass 1 kg, wet mass 1 kg
- nickel, class 1: -3164.38 kg; source Hochfeld C. 1997
  Literature value.
  production volume
    Calculated as the total production of nickel metal in Russia in 2012 according to the USGS Minerals Yearbook 2015).
  properties: dry mass 1 kg, price 12.0741 EUR2005, wet mass 1 kg
- non-ferrous metal smelter: 1.9863e-7 unit; lognormal variance with pedigree 0.4301, pedigree (4,2,5,5,4)
  Estimation from dataset author.
- platinum: -0.342466 kg; source Hochfeld C. 1997
  Platinum is a silvery-white metal and is probably best known for its use in jewellery. However, jewellery actually represents only about 38% of overall platinum use, an equivalent volume of platinum is used in catalytic converters, with the remaining 20% being used in other industrial applications.
  Platinum is hard and extremely dense. Platinum and its relatives, iridium and osmium, are the most dense metals known (platinum is nearly twice as dense as lead and 11% more dense than gold). It has a high melting point and high temperature stability and corrosion resistance; and it is a good oxidation catalyst, conductive and oxidation resistant. It’s biological compatibility makes it an important component in medical applications.
  Literature value.
  production volume
    81 t / a
    USGS
  properties: dry mass 1 kg, price 20600 EUR2005, wet mass 1 kg
- rhodium: -0.0273973 kg; source Hochfeld C. 1997
  Rhodium's hardness makes it an alloying agent to harden platinum. With this hardness, along with its high melting point, high temperature stability and corrosion resistance, rhodium is used in many industrial processes such as glass, glass fibre and nitric acid production. Like other PGMs, Rhodium has catalytic qualities, an thus is used in catalytic converters.
  Literature value.
  production volume
    81 t / a
    Calculated relative to Pt output. This amounts to 15% of output in Russia in 2005 of 'other platinum-group metals'.
  properties: dry mass 1 kg, price 23800 EUR2005, wet mass 1 kg
- sulfidic tailings, generic: -33150.7 kg; source IPPC 2002; lognormal variance with pedigree 0.001, pedigree (2,2,2,3,1)
  Estimation: 50 % refilled overburden and tailings is estimated.
  production volume
    (same comment as for nickel smelter slag)
  properties: aluminium content 0.014738, calcium content 0.0045972, carbon content, fossil 0.0087785, dry mass 0.7 kg, iron content 0.015374, magnesium content 0.0022359, oxygen content 0.89157, potassium content 0.0025181, silicon content 0.053273, sodium content 0.0014472, water content 0.428571, wet mass 1 kg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

## Inputs from nature
- Copper [natural resource, in ground]: 4876.71 kg; source Krauss U. 1999; lognormal variance with pedigree 0.04, pedigree (1,1,5,1,1)
  Ore composition: Cu, 3.2%; Ni, 2.3%; Pt, 2.5 ppm, Pd, 7.3 ppm; Rh, 0.2 ppm; Estimation: Yield = 90%; 89 750 kg of ore per kg of PGM.
  Further references: Hilbrans H. and Hinrichs W. (1999) Stoffmengenflüsse und Energiebedarf bei der Gewinnung ausgewählter mineralischer Rohstoffe; Teilstudie Nickel. In: Geologisches Jahrbuch, Vol. Sonderhefte SH 7. Bundesanstalt für Geowissenschaften und Rohstoffe, Hannover. ISBN 3-510-95829-2.
- Nickel [natural resource, in ground]: 3520.55 kg; source Krauss U. 1999; lognormal variance with pedigree 0.04, pedigree (1,1,5,1,1)
  Ore composition: Ni, 2.3%; Cu, 3.2%; Pt, 2.5 ppm; Pd, 7.3 ppm; Rh, 0.2 ppm; Estimation: Yield = 90%; 89 750 kg of ore per kg of PGM.
  Further references: Hilbrans H. and Hinrichs W. (1999) Stoffmengenflüsse und Energiebedarf bei der Gewinnung ausgewählter mineralischer Rohstoffe; Teilstudie Nickel. In: Geologisches Jahrbuch, Vol. Sonderhefte SH 7. Bundesanstalt für Geowissenschaften und Rohstoffe, Hannover. ISBN 3-510-95829-2.
- Occupation, mineral extraction site [natural resource, land]: 21.7808 m2*year; lognormal variance with pedigree 0.0821, pedigree (3,2,5,1,1)
  Estimation from dataset author: Ocupation of land through direct exploration is estimated with the standard value for non-ferrous metals without heap leaching processes of 0.0025 m2/t and 0.075 m2a/t ore mined.
  Uncertainty: c
- Palladium [natural resource, in ground]: 1.11096 kg; source Krauss U. 1999; lognormal variance with pedigree 0.04, pedigree (1,1,5,1,1)
  (same comment as for Nickel)
- Platinum [natural resource, in ground]: 0.380822 kg; source Krauss U. 1999; lognormal variance with pedigree 0.04, pedigree (1,1,5,1,1)
  (same comment as for Nickel)
- Rhodium [natural resource, in ground]: 0.030411 kg; source Krauss U. 1999; lognormal variance with pedigree 0.04, pedigree (1,1,5,1,1)
  (same comment as for Nickel)
- Transformation, from unspecified [natural resource, land]: 0.306849 m2; lognormal variance with pedigree 0.1621, pedigree (3,2,5,1,1)
  Estimation from dataset author: Transformation of land through direct exploration is estimated with the standard value for non-ferrous metals without heap leaching processes of 0.0025 m2/t and 0.075 m2a/t ore mined.
  Uncertainty: c
- Transformation, to mineral extraction site [natural resource, land]: 0.306849 m2; lognormal variance with pedigree 0.1621, pedigree (3,2,5,1,1)
  (same comment as for Transformation, from unspecified)
- Water, river [natural resource, in water]: 1283.56 m3; name water_river_input; source Hochfeld C. 1997; lognormal variance with pedigree 0.0407, pedigree (2,2,5,1,1)
  Calculated value: Total water consumption value results from the addition of water consumption of the following steps: Mining, beneficiation, metallurgy and separation.
  MINING: 6.28 m3
  Extrapolation: Demand for water was not available for the process in RUS, it was approximated with the value for RSA (of 0.21m3 / t mined ore).
  Estimation: Two third of the water resource use in mining is assumed to be ground water, the rest is surface water.
  BENEFICIATION: 31.7 m3
  Estimation: 0.35 m3/t ore mined.
  METALLURGY: 71.4 m3
  SEPARATION: 827 m3
  Calculated value: Total water consumption value results from the addition of water consumption of the following steps: Mining, beneficiation, metallurgy and separation.
  MINING: 6.28 m3
  Extrapolation: Demand for water was not available for the process in RUS, it was approximated with the value for RSA (of 0.21m3 / t mined ore).
  Estimation: Two third of the water resource use in mining is assumed to be ground water, the rest is surface water.
  BENEFICIATION: 31.7 m3
  Estimation: 0.35 m3/t ore mined.
  METALLURGY: 71.4 m3
  SEPARATION: 827 m3
- Water, well, in ground [natural resource, in water]: 17.2603 m3; name water_well_in_ground_input; source Hochfeld C. 1997; lognormal variance with pedigree 0.0601, pedigree (3,2,5,1,3)
  Extrapolation: Demand for water was not available for the process in RUS, it was approximated with the value for RSA (of 0.21m3 / t mined ore).
  Estimation: Two third of the water resource use in mining is assumed to be ground water, the rest is surface water.
  Extrapolation: Demand for water was not available for the process in RUS, it was approximated with the value for RSA (of 0.21m3 / t mined ore).
  Estimation: Two third of the water resource use in mining is assumed to be ground water, the rest is surface water.

## Emissions to nature
- Antimony ion [air, non-urban air or from high stacks]: 0.0100548 kg; source NPI 2001; lognormal variance with pedigree 0.1001, pedigree (3,2,5,1,3)
  Calculated value: Total emission values result from the addition of the emissions values of the following steps: Mining and beneficiation.
  MINING:
  Mining emissions are included in the beneficiation step.
  BENEFICIATION:
  Modelled, based on “ISIC 0729” - pdf-document on the dedicated talk page of ecoinvent (www.ecoinvent.org/documentation)
  See part: Regarding “platinum group metal mine operation, ore with high palladium content, RU 2002” dataset.
  Further references: Anonymous (1998b) Dust Control. In: Best Practice Environmental Management in Mining. Environment Australia, Online-Version under: http://www.ea.gov.au/industry/sustainable/mining/booklets/dust/.
- Arsenic ion [air, non-urban air or from high stacks]: 0.0441096 kg; source NPI 2001; lognormal variance with pedigree 0.7101, pedigree (3,2,5,1,3)
  Calculated value: Total emission values result from the addition of the emissions values of the following steps: Mining, beneficiation, and metallurgy.
  MINING:
  Mining emissions are included in the beneficiation step.
  BENEFICIATION:
  Modelled, based on “ISIC 0729” - pdf-document on the dedicated talk page of ecoinvent (www.ecoinvent.org/documentation)
  See part: Regarding “platinum group metal mine operation, ore with high palladium content, RU 2002” dataset.
  METALLURGY:
  Modelled, based on “ISIC 0729” - pdf-document on the dedicated talk page of ecoinvent (www.ecoinvent.org/documentation)
  See part: Regarding “platinum group metal mine operation, ore with high palladium content, RU 2002” dataset.
  Further references:
  Anonymous (1998b) Dust Control. In: Best Practice Environmental Management in Mining. Environment Australia, Online-Version under: http://www.ea.gov.au/industry/sustainable/mining/booklets/dust/.
  IPPC (2001) Integrated Pollution Prevention and Control (IPPC); Reference Document on Best Available Techniques in the Non Ferrous Metals Industries. European Commission. Retrieved from http://www.jrc.es/pub/english.cgi/0/733169
- Beryllium II [air, non-urban air or from high stacks]: 0.000130685 kg; source NPI 2001; lognormal variance with pedigree 0.1001, pedigree (3,2,5,1,3)
  (same comment as for Antimony ion)
- Boron [air, non-urban air or from high stacks]: 0.00050274 kg; source NPI 2001; lognormal variance with pedigree 0.1001, pedigree (3,2,5,1,3)
  (same comment as for Antimony ion)
- Cadmium II [air, non-urban air or from high stacks]: 5.53425e-6 kg; source NPI 2001; lognormal variance with pedigree 0.1001, pedigree (3,2,5,1,3)
  (same comment as for Antimony ion)
- Carbon dioxide, fossil [air, unspecified]: 1354.79 kg; source Hochfeld C. 1997; lognormal variance with pedigree 0.1281, pedigree (4,2,5,1,4)
  Estimation: Lime was added in beneficiation which releases now fossil carbon dioxide. Flux is assumed to consist of 50% lime, which also releases carbon dioxide. 0.75 t flux per t matte is reported for copper in Krauss et al. (1999). Burning of 1 t lime (CaCO3) yields 0.44 t CO2.
- Carbon disulfide [air, non-urban air or from high stacks]: 12.2877 kg; source NPI 2001; lognormal variance with pedigree 0.2501, pedigree (4,2,5,5,4)
  (same comment as for chemical, organic)
- Chromium III [air, non-urban air or from high stacks]: 0.0050274 kg; source NPI 2001; lognormal variance with pedigree 0.1001, pedigree (3,2,5,1,3)
  (same comment as for Antimony ion)
- Cobalt II [air, non-urban air or from high stacks]: 0.227397 kg; source NPI 2001; lognormal variance with pedigree 0.7101, pedigree (3,2,5,1,3)
  (same comment as for Antimony ion)
- Copper ion [air, non-urban air or from high stacks]: 0.30411 kg; source NPI 2001; lognormal variance with pedigree 0.7101, pedigree (3,2,5,1,3)
  (same comment as for Arsenic ion)
- Dioxins, measured as 2,3,7,8-tetrachlorodibenzo-p-dioxin [air, non-urban air or from high stacks]: 7.54795e-8 kg; source IPPC 2001; lognormal variance with pedigree 0.3601, pedigree (3,2,5,1,3)
  Modelled, based on “ISIC 0729” - pdf-document on the dedicated talk page of ecoinvent (www.ecoinvent.org/documentation)
  See part: Regarding “platinum group metal mine operation, ore with high palladium content, RU 2002” dataset; section 'Metallurgy'.
- Fluorine [air, non-urban air or from high stacks]: 0.0478082 kg; source NPI 2001; lognormal variance with pedigree 0.1001, pedigree (3,2,5,1,3)
  (same comment as for Antimony ion)
- Lead II [air, non-urban air or from high stacks]: 0.235616 kg; source NPI 2001; lognormal variance with pedigree 0.7101, pedigree (3,2,5,1,3)
  Calculated value: Total emission values result from the addition of the emissions values of the following steps: Mining, beneficiation, and metallurgy.
  MINING:
  Mining emissions are included in the beneficiation step.
  BENEFICIATION:
  Modelled, based on “ISIC 0729” - pdf-document on the dedicated talk page of ecoinvent (www.ecoinvent.org/documentation)
  See part: Regarding “platinum group metal mine operation, ore with high rhodium content, ZA 2002” dataset.
  METALLURGY:
  Modelled, based on “ISIC 0729” - pdf-document on the dedicated talk page of ecoinvent (www.ecoinvent.org/documentation)
  See part: Regarding “platinum group metal mine operation, ore with high rhodium content, ZA 2002” dataset.
  Further references:
  Anonymous (1998b) Dust Control. In: Best Practice Environmental Management in Mining. Environment Australia, Online-Version under: http://www.ea.gov.au/industry/sustainable/mining/booklets/dust/.
  IPPC (2001) Integrated Pollution Prevention and Control (IPPC); Reference Document on Best Available Techniques in the Non Ferrous Metals Industries. European Commission. Retrieved from http://www.jrc.es/pub/english.cgi/0/733169
- Manganese II [air, non-urban air or from high stacks]: 0.0478082 kg; source NPI 2001; lognormal variance with pedigree 0.1001, pedigree (3,2,5,1,3)
  (same comment as for Antimony ion)
- Mercury II [air, non-urban air or from high stacks]: 2.50685e-6 kg; source NPI 2001; lognormal variance with pedigree 0.1001, pedigree (3,2,5,1,3)
  (same comment as for Antimony ion)
- NMVOC, non-methane volatile organic compounds [air, non-urban air or from high stacks]: 1.50685 kg; source IPPC 2001; lognormal variance with pedigree 0.1001, pedigree (3,2,5,1,3)
  (same comment as for Dioxins, measured as 2,3,7,8-tetrachlorodibenzo-p-dioxin)
- Nickel II [air, non-urban air or from high stacks]: 0.238356 kg; source NPI 2001; lognormal variance with pedigree 0.1001, pedigree (3,2,5,1,3)
  (same comment as for Antimony ion)
- Nitrogen oxides [air, non-urban air or from high stacks]: 0.0482192 kg; source IPPC 2001; lognormal variance with pedigree 0.1001, pedigree (3,2,5,1,3)
  Extrapolation: Value corresponds to NOx generation from dataset 'platinum group metal mine operation, ore with high rhodium content, ZA 2002'.
- Particulate Matter, < 2.5 um [air, non-urban air or from high stacks]: 2.47945 kg; source NPI 2001; lognormal variance with pedigree 0.5521, pedigree (3,2,5,1,5)
  Calculated value: Total emission values result from the addition of the emissions values of the following steps: Mining, beneficiation, metallurgy and refining.
  MINING:
  Mining emissions are included in the beneficiation step.
  BENEFICIATION:
  Modelled, based on “ISIC 0729” - pdf-document on the dedicated talk page of ecoinvent (www.ecoinvent.org/documentation)
  See part: Regarding “platinum group metal mine operation, ore with high palladium content, RU 2002” dataset.
  METALLURGY:
  Modelled, based on “ISIC 0729” - pdf-document on the dedicated talk page of ecoinvent (www.ecoinvent.org/documentation)
  See part: Regarding “platinum group metal mine operation, ore with high palladium content, RU 2002” dataset.
  REFINING:
  Extrapolation: Value corresponds to PM2.5 generation from dataset 'platinum group metal mine operation, ore with high rhodium content, ZA 2002'.
  Further references:
  Anonymous (1998b) Dust Control. In: Best Practice Environmental Management in Mining. Environment Australia, Online-Version under: http://www.ea.gov.au/industry/sustainable/mining/booklets/dust/.
  IPPC (2001) Integrated Pollution Prevention and Control (IPPC); Reference Document on Best Available Techniques in the Non Ferrous Metals Industries. European Commission. Retrieved from http://www.jrc.es/pub/english.cgi/0/733169
- Particulate Matter, > 10 um [air, non-urban air or from high stacks]: 26.3014 kg; source NPI 2001; lognormal variance with pedigree 0.2921, pedigree (3,2,5,1,5)
  Calculated value: Total emission values result from the addition of the emissions values of the following steps: Mining, beneficiation, and metallurgy.
  MINING:
  Mining emissions are included in the beneficiation step.
  BENEFICIATION:
  Modelled, based on “ISIC 0729” - pdf-document on the dedicated talk page of ecoinvent (www.ecoinvent.org/documentation)
  See part: Regarding “platinum group metal mine operation, ore with high palladium content, RU 2002” dataset.
  METALLURGY:
  Modelled, based on “ISIC 0729” - pdf-document on the dedicated talk page of ecoinvent (www.ecoinvent.org/documentation)
  See part: Regarding “platinum group metal mine operation, ore with high palladium content, RU 2002” dataset.
  REFINING:
  Extrapolation: Value corresponds to PM>10 generation from dataset 'platinum group metal mine operation, ore with high rhodium content, ZA 2002'.
  Further references:
  Anonymous (1998b) Dust Control. In: Best Practice Environmental Management in Mining. Environment Australia, Online-Version under: http://www.ea.gov.au/industry/sustainable/mining/booklets/dust/.
  IPPC (2001) Integrated Pollution Prevention and Control (IPPC); Reference Document on Best Available Techniques in the Non Ferrous Metals Industries. European Commission. Retrieved from http://www.jrc.es/pub/english.cgi/0/733169
- Particulate Matter, > 2.5 um and < 10um [air, non-urban air or from high stacks]: 24.5205 kg; source NPI 2001; lognormal variance with pedigree 0.3721, pedigree (3,2,5,1,5)
  Calculated value: Total emission values result from the addition of the emissions values of the following steps: Mining, beneficiation, and metallurgy.
  MINING:
  Mining emissions are included in the beneficiation step.
  BENEFICIATION:
  Modelled, based on “ISIC 0729” - pdf-document on the dedicated talk page of ecoinvent (www.ecoinvent.org/documentation)
  See part: Regarding “platinum group metal mine operation, ore with high palladium content, RU 2002” dataset.
  METALLURGY:
  Modelled, based on “ISIC 0729” - pdf-document on the dedicated talk page of ecoinvent (www.ecoinvent.org/documentation)
  See part: Regarding “platinum group metal mine operation, ore with high palladium content, RU 2002” dataset.
  REFINING:
  Extrapolation: Value corresponds to PM2.5-10 generation from dataset 'platinum group metal mine operation, ore with high rhodium content, ZA 2002'.
  Further references:
  Anonymous (1998b) Dust Control. In: Best Practice Environmental Management in Mining. Environment Australia, Online-Version under: http://www.ea.gov.au/industry/sustainable/mining/booklets/dust/.
  IPPC (2001) Integrated Pollution Prevention and Control (IPPC); Reference Document on Best Available Techniques in the Non Ferrous Metals Industries. European Commission. Retrieved from http://www.jrc.es/pub/english.cgi/0/733169
- Selenium IV [air, non-urban air or from high stacks]: 2.50685e-6 kg; source NPI 2001; lognormal variance with pedigree 0.1001, pedigree (3,2,5,1,3)
  (same comment as for Antimony ion)
- Sulfur dioxide [air, non-urban air or from high stacks]: 40411 kg; source Hochfeld C. 1997; lognormal variance with pedigree 0.0761, pedigree (4,2,5,1,3)
  Calculated value: Total emission values result from the addition of the emissions values of the following steps: Metallurgy and refining.
  METALLURGY:
  Modelled, based on “ISIC 0729” - pdf-document on the dedicated talk page of ecoinvent (www.ecoinvent.org/documentation)
  See part: Regarding “platinum group metal mine operation, ore with high palladium content, RU 2002” dataset.
  REFINING:
  Extrapolation: Value corresponds to SO2 generation from dataset 'platinum group metal mine operation, ore with high rhodium content, ZA 2002'.
  Further references: IPPC (2001) Integrated Pollution Prevention and Control (IPPC); Reference Document on Best Available Techniques in the Non Ferrous Metals Industries. European Commission. Retrieved from http://www.jrc.es/pub/english.cgi/0/733169
- Tin ion [air, non-urban air or from high stacks]: 0.0493151 kg; source IPPC 2001; lognormal variance with pedigree 0.7101, pedigree (3,2,5,1,3)
  (same comment as for Dioxins, measured as 2,3,7,8-tetrachlorodibenzo-p-dioxin)
- Water [air, unspecified]: 195.123 m3; name water_to_air_unspecified; = (water_river_input*fraction_PW_to_air)+(water_well_in_ground_input*fraction_PW_to_air); lognormal variance with pedigree 0.0807, pedigree (2,2,5,1,1)
  Calculated value based on literature values and expert opinion. See comments in the parametres' comment field.
  property fraction, origin: fresh water 1; name fraction_origin_fresh_water
  property fraction, origin: salt water 0; name fraction_origin_salt_water
  property fraction, origin: unspecified 0; name fraction_origin_unspecified
- Zinc II [air, non-urban air or from high stacks]: 0.772603 kg; source NPI 2001; lognormal variance with pedigree 0.7101, pedigree (3,2,5,1,3)
  (same comment as for Arsenic ion)
- Aluminium III [water, surface water]: 0.0059726 kg; source IPPC 2002; lognormal variance with pedigree 1.48, pedigree (5,5,5,5,5)
  Calculated value: Total emission values result from the addition of the emissions values of the following steps: Mining and beneficiation.
  MINING:
  Modelled, based on 'ISIC 0729' - pdf-document on the dedicated talk page of ecoinvent (www.ecoinvent.org/documentation)
  See part: Regarding 'platinum group metal mine operation, ore with high palladium content, RU 2002' dataset.
  BENEFICIATION:
  Modelled, based on 'ISIC 0729' - pdf-document on the dedicated talk page of ecoinvent (www.ecoinvent.org/documentation)
  See part: Regarding 'platinum group metal mine operation, ore with high palladium content, RU 2002' dataset.
- Arsenic ion [water, surface water]: 0.000417808 kg; source IPPC 2002; lognormal variance with pedigree 1.48, pedigree (5,5,5,5,5)
  Calculated value: Total emission values result from the addition of the emissions values of the following steps: Mining, beneficiation, and Metallurgy and separation of non-ferrous metals.
  MINING:
  Modelled, based on “ISIC 0729” - pdf-document on the dedicated talk page of ecoinvent (www.ecoinvent.org/documentation)
  See part: Regarding “platinum group metal mine operation, ore with high palladium content, RU 2002” dataset.
  BENEFICIATION:
  Modelled, based on “ISIC 0729” - pdf-document on the dedicated talk page of ecoinvent (www.ecoinvent.org/documentation)
  See part: Regarding “platinum group metal mine operation, ore with high palladium content, RU 2002” dataset.
  METALLURGY AND SEPARATION OF NON-FERROUS METALS
  Modelled, based on “ISIC 0729” - pdf-document on the dedicated talk page of ecoinvent (www.ecoinvent.org/documentation)
  See part: Regarding “platinum group metal mine operation, ore with high palladium content, RU 2002” dataset.
- BOD5, Biological Oxygen Demand [water, surface water]: 0.50411 kg; lognormal variance with pedigree 1.48, pedigree (5,5,5,5,5)
  Estimation from dataset author.
- COD, Chemical Oxygen Demand [water, surface water]: 0.757534 kg; source IPPC 2002; lognormal variance with pedigree 1.48, pedigree (5,5,5,5,5)
  Calculated value: Total emission values result from the addition of the emissions values of the following steps: Mining, beneficiation and refining.
  MINING:
  Modelled, based on “ISIC 0729” - pdf-document on the dedicated talk page of ecoinvent (www.ecoinvent.org/documentation)
  See part: Regarding “platinum group metal mine operation, ore with high palladium content, RU 2002” dataset.
  BENEFICIATION:
  Modelled, based on “ISIC 0729” - pdf-document on the dedicated talk page of ecoinvent (www.ecoinvent.org/documentation)
  See part: Regarding “platinum group metal mine operation, ore with high palladium content, RU 2002” dataset.
  REFINING:
  Extrapolation: Value corresponds to COD from dataset 'platinum group metal mine operation, ore with high rhodium content, ZA 2002'.
- Cadmium II [water, surface water]: 9.53425e-5 kg; source IPPC 2002; lognormal variance with pedigree 1.48, pedigree (5,5,5,5,5)
  (same comment as for Arsenic ion)
- Calcium II [water, surface water]: 47.5342 kg; source IPPC 2002; lognormal variance with pedigree 1.37, pedigree (1,1,5,1,1)
  (same comment as for Aluminium III)
- Chromium III [water, surface water]: 0.00283562 kg; source IPPC 2002; lognormal variance with pedigree 1.48, pedigree (5,5,5,5,5)
  (same comment as for Arsenic ion)
- Cobalt II [water, surface water]: 5.41096e-5 kg; source IPPC 2002; lognormal variance with pedigree 1.48, pedigree (5,5,5,5,5)
  (same comment as for Aluminium III)
- Copper ion [water, surface water]: 0.0132466 kg; source IPPC 2002; lognormal variance with pedigree 1.48, pedigree (5,5,5,5,5)
  Calculated value: Total emission values result from the addition of the emissions values of the following steps: Mining, beneficiation, Metallurgy and separation of non-ferrous metals, and refining.
  MINING:
  Modelled, based on “ISIC 0729” - pdf-document on the dedicated talk page of ecoinvent (www.ecoinvent.org/documentation)
  See part: Regarding “platinum group metal mine operation, ore with high palladium content, RU 2002” dataset.
  BENEFICIATION:
  Modelled, based on “ISIC 0729” - pdf-document on the dedicated talk page of ecoinvent (www.ecoinvent.org/documentation)
  See part: Regarding “platinum group metal mine operation, ore with high palladium content, RU 2002” dataset.
  METALLURGY AND SEPARATION OF NON-FERROUS METALS
  Modelled, based on “ISIC 0729” - pdf-document on the dedicated talk page of ecoinvent (www.ecoinvent.org/documentation)
  See part: Regarding “platinum group metal mine operation, ore with high palladium content, RU 2002” dataset.
  REFINING:
  Extrapolation: Value corresponds to Cu emissions from dataset 'platinum group metal mine operation, ore with high rhodium content, ZA 2002'.
- Cyanide [water, surface water]: 0.476712 kg; source IPPC 2002; lognormal variance with pedigree 0.5282, pedigree (4,2,5,3,4)
  Modelled, based on “ISIC 0729” - pdf-document on the dedicated talk page of ecoinvent (www.ecoinvent.org/documentation)
  See part: Regarding “platinum group metal mine operation, ore with high palladium content, RU 2002” dataset; section 'Beneficiation'.
  Uncertainty: i
- DOC, Dissolved Organic Carbon [water, surface water]: 0.29589 kg; lognormal variance with pedigree 1.48, pedigree (5,5,5,5,5)
  Estimation from dataset author.
- Dissolved solids [water, surface water]: 0.357534 kg; source IPPC 2002; lognormal variance with pedigree 1.48, pedigree (5,5,5,5,5)
  (same comment as for Aluminium III)
- Iron ion [water, surface water]: 0.020137 kg; source IPPC 2002; lognormal variance with pedigree 1.48, pedigree (5,5,5,5,5)
  (same comment as for Aluminium III)
- Lead II [water, surface water]: 0.00209589 kg; source IPPC 2002; lognormal variance with pedigree 1.48, pedigree (5,5,5,5,5)
  Calculated value: Total emission values result from the addition of the emissions values of the following steps: Mining, beneficiation, Metallurgy and separation of non-ferrous metals, and refining.
  MINING:
  Modelled, based on “ISIC 0729” - pdf-document on the dedicated talk page of ecoinvent (www.ecoinvent.org/documentation)
  See part: Regarding “platinum group metal mine operation, ore with high palladium content, RU 2002” dataset.
  BENEFICIATION:
  Modelled, based on “ISIC 0729” - pdf-document on the dedicated talk page of ecoinvent (www.ecoinvent.org/documentation)
  See part: Regarding “platinum group metal mine operation, ore with high palladium content, RU 2002” dataset.
  METALLURGY AND SEPARATION OF NON-FERROUS METALS
  Modelled, based on “ISIC 0729” - pdf-document on the dedicated talk page of ecoinvent (www.ecoinvent.org/documentation)
  See part: Regarding “platinum group metal mine operation, ore with high palladium content, RU 2002” dataset.
  REFINING:
  Extrapolation: Value corresponds to Pb emissions from dataset 'platinum group metal mine operation, ore with high rhodium content, ZA 2002'.
- Manganese II [water, surface water]: 0.00171233 kg; source IPPC 2002; lognormal variance with pedigree 1.48, pedigree (5,5,5,5,5)
  (same comment as for Aluminium III)
- Mercury II [water, surface water]: 3.16438e-5 kg; source IPPC 2002; lognormal variance with pedigree 1.48, pedigree (5,5,5,5,5)
  Calculated value: Total emission values result from the addition of the emissions values of the following steps: Mining, beneficiation, Metallurgy and separation of non-ferrous metals, and refining.
  MINING:
  Modelled, based on “ISIC 0729” - pdf-document on the dedicated talk page of ecoinvent (www.ecoinvent.org/documentation)
  See part: Regarding “platinum group metal mine operation, ore with high palladium content, RU 2002” dataset.
  BENEFICIATION:
  Modelled, based on “ISIC 0729” - pdf-document on the dedicated talk page of ecoinvent (www.ecoinvent.org/documentation)
  See part: Regarding “platinum group metal mine operation, ore with high palladium content, RU 2002” dataset.
  METALLURGY AND SEPARATION OF NON-FERROUS METALS
  Modelled, based on “ISIC 0729” - pdf-document on the dedicated talk page of ecoinvent (www.ecoinvent.org/documentation)
  See part: Regarding “platinum group metal mine operation, ore with high palladium content, RU 2002” dataset.
  REFINING:
  Extrapolation: Value corresponds to Hg emissions from dataset 'platinum group metal mine operation, ore with high rhodium content, ZA 2002'.
- Nickel II [water, surface water]: 0.00578082 kg; source IPPC 2002; lognormal variance with pedigree 1.48, pedigree (5,5,5,5,5)
  Calculated value: Total emission values result from the addition of the emissions values of the following steps: Mining, beneficiation, Metallurgy and separation of non-ferrous metals, and refining.
  MINING:
  Modelled, based on “ISIC 0729” - pdf-document on the dedicated talk page of ecoinvent (www.ecoinvent.org/documentation)
  See part: Regarding “platinum group metal mine operation, ore with high palladium content, RU 2002” dataset.
  BENEFICIATION:
  Modelled, based on “ISIC 0729” - pdf-document on the dedicated talk page of ecoinvent (www.ecoinvent.org/documentation)
  See part: Regarding “platinum group metal mine operation, ore with high palladium content, RU 2002” dataset.
  METALLURGY AND SEPARATION OF NON-FERROUS METALS
  Modelled, based on “ISIC 0729” - pdf-document on the dedicated talk page of ecoinvent (www.ecoinvent.org/documentation)
  See part: Regarding “platinum group metal mine operation, ore with high palladium content, RU 2002” dataset.
  REFINING:
  Extrapolation: Value corresponds to Ni emissions from dataset 'platinum group metal mine operation, ore with high rhodium content, ZA 2002'.
- Nitrogen, organic bound [water, surface water]: 1.57534 kg; source IPPC 2002; lognormal variance with pedigree 1.48, pedigree (5,5,5,5,5)
  (same comment as for Aluminium III)
- Sulfate [water, surface water]: 163.014 kg; source IPPC 2002; lognormal variance with pedigree 1.48, pedigree (5,5,5,5,5)
  (same comment as for Aluminium III)
- TOC, Total Organic Carbon [water, surface water]: 0.29589 kg; lognormal variance with pedigree 1.48, pedigree (5,5,5,5,5)
  Estimation from dataset author.
- Tin ion [water, surface water]: 0.00279452 kg; source IPPC 2002; lognormal variance with pedigree 1.37, pedigree (1,1,5,1,1)
  Modelled, based on “ISIC 0729” - pdf-document on the dedicated talk page of ecoinvent (www.ecoinvent.org/documentation)
  See part: Regarding “platinum group metal mine operation, ore with high palladium content, RU 2002” dataset, section 'Metallurgy and separation of non-ferrous metals'.
- Water [water, unspecified]: 1105.7 m3; name water_to_water_unspecified; = water_river_input*(1-fraction_PW_to_air)+water_well_in_ground_input*(1-fraction_PW_to_air); lognormal variance with pedigree 0.0807, pedigree (2,2,5,1,1)
  (same comment as for Water)
  property carbon content, fossil 0; name C_content_fossil
  property carbon content, non-fossil 0; name C_content_non_fossil
  property fraction, origin: fresh water 1; name fraction_origin_fresh_water_Ww
  property fraction, origin: salt water 0; name fraction_origin_salt_water_Ww
  property fraction, origin: unspecified 0; name fraction_origin_unspecified_Ww
  property water in wet mass 1000 kg; name WWM
- Zinc II [water, surface water]: 0.0284932 kg; source IPPC 2002; lognormal variance with pedigree 1.48, pedigree (5,5,5,5,5)
  (same comment as for Arsenic ion)

## Sampling procedure
Literature

## Extrapolations
see Geography and Technology
