# milk production, from cow

Dataset: EcoSpold 2, unit process
Geography: RoW
Time period: 2009-01-01 to 2022-12-31
Technology level: current
Classification: ISIC rev.4 ecoinvent: 0141:Raising of cattle and buffaloes
Scenario: Business-as-Usual
System model: Substitution, consequential, long-term
Share of production covered: 99 %
Generated by: Dominique Maxime
Published in: Quantis 2012
Database: ecoinvent
isCopyrightProtected: true

## General comment
This dataset was built as a weighted average of regional datasets of the same activityName. Weights are based on production volumes.
ZA: production volume = 3.15e+09 kg/year, weight = 0.5116
CA-QC: production volume = 3.01e+09 kg/year, weight = 0.4884

## Included activities start
This activity starts from the reception and storage of feed materials, and dairy herd housing.

## Included activities end
This activity ends with the provision of milk at farm, ready-to-deliver. The dataset includes the consumption of feed; the livestock management operations (including bedding, drinking water, milking equipment, cleaning products and water, ammonia and dinitrogen oxyde emissions from housing, and methane emissions from enteric fermentation), manure management emissions; energy and buildings (including electricity for dairying, cattle housing and milk parlour equipment and buildings, and gasoline for regular operations) necessary for the operation of a typical dairy farm. The dataset does not include fodder and feed production and processing into meal for animals, litter production, manure management operations (however, emissions are accounted for); nor milk transportation beyond the farm gate (e.g. to dairy processing plants). Also, the dataset does not include particulate matter emissions, nor any drugs used on the dairy farm, because of the lack of data available on quantities and content. In terms of mass, drugs represent much less than 1% of inputs.

## Geography
This dataset is a weighted average built from the following geographies: ZA, CA-QC.

## Technology
Data and assumptions are intended to reflect current equipment, processes, and market conditions.

## Time period
Period indicated in the reference.

## Reference product
- cow milk: 1 kg; By-product classification allocatable product; CPC 02211: Raw milk of cattle
  production volume 5.96414e11 kg
    2009-2011 average of annual world cow milk production. Source: FAOSTAT, 2013 (Milk, whole fresh cow)
  property carbon content, non-fossil 0.53797
    Calculated from milk composition (Canadian Nutrient File (2010). Milk, fluid, whole, producer, 3.7% M.F. (Canadian Nutrient File database, Food Code: 123)) and from C content of nutrients (protein, fat, carbohydrates) according to A.D. Kay and T. Vrede ('Evolutionary and Biochemical Aspects', in Global Ecology, 2010, Elsevier B.V., S.E. Jørgensen Ed.).
  property energy content 2.68 MJ
    Energy content for milk at 3.7% fat and 3.3% protein. Canadian Nutrient File (2010). Milk, fluid, whole, producer, 3.7% M.F. (Canadian Nutrient File database, Food Code: 123)
  property price 0.349 EUR2005
    Calculated based on data from FAOSTAT (accessed 20140428). The price is calculated as a weighted average (by yearly production) of prices of "Milk, whole fresh cow" for all the countries in the world where data for both price and production volume are available. The Producer Prices -Annual from the year 2005. Using the same calculation and data the price in 2010 was 458.7 Euro.
  properties: carbon allocation 0.0662241 kg, carbon content 0.53797, carbon content, fossil 0, dry mass 0.1231 kg, water content 7.12348, water in wet mass 0.8769 kg, wet mass 1 kg

## Inputs from technosphere
- alfalfa-grass silage: 0.241422 kg; lognormal variance with pedigree 0.0107, pedigree (1,2,4,5,1)
  properties: carbon content, non-fossil 0.484, dry mass 1 kg, energy content 18.55 MJ, water content 1.1739, wet mass 2.1739 kg
- barley grain, feed: 0.0332896 kg; lognormal variance with pedigree 0.0127, pedigree (3,2,4,5,1)
  properties: carbon content, non-fossil 0.46538, dry mass 0.86 kg, water content 0.16279, wet mass 1 kg
- cattle for slaughtering, live weight: -0.00381649, -0.0260618 kg (2 suppliers, which the file names only by identifier); sum of these -0.0298783 kg
  production volume
    Calculated from production volume of reference product using the relative outputs.
  properties: carbon content, non-fossil 0.4928, dry mass 0.6 kg, energy content 14.9367 MJ, price 2.025 EUR2005, water content 0.666667, wet mass 1 kg
  note on carbon content, non-fossil: Calculated from live weight empty body composition in fat and protein ( Johnson, I.R. et al. (2012). J. Anim. Sci. 90(13):4741-475 ; Williams, C.B. (2005). J. Anim. Sci. 83(6):1262-1266) and from C content of nutrients (protein, fat) according to A.D. Kay and T. Vrede ('Evolutionary and Biochemical Aspects', in Global Ecology, 2010, Elsevier B.V., S.E. Jørgensen Ed.).
  note on energy content: Energy content calculated from animal fat and protein composition and energy content for animal fat and protein of 39.3 and 23.6 MJ/kg, respectively. Johnson, I.R. et al. (2012). J. Anim. Sci. 90(13):4741-475. Williams, C.B. (2005). J. Anim. Sci. 83(6):1262-1266.
- diesel, burned in agricultural machinery: 0.225122 MJ; lognormal variance with pedigree 0.0452, pedigree (3,3,5,5,1)
- electricity, low voltage: 4.13083e-6, 9.83787e-5, 0.000613602, 0.0369285, 0.000118952, 8.71524e-6, 4.4795e-6, 2.15289e-5, 2.79535e-5, 0.00519621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 kWh (37 suppliers, which the file names only by identifier); sum of these 0.053671 kWh; lognormal variance with pedigree 0.0452, pedigree (3,3,5,5,1)
- energy feed, gross: 0.112829 MJ; lognormal variance with pedigree 0.0127, pedigree (3,2,4,5,1)
  properties: dry mass 1 kg, wet mass 1 kg
- hay: 0.0668956 kg; lognormal variance with pedigree 0.0107, pedigree (1,2,4,5,1)
  properties: carbon content, non-fossil 0.4801, dry mass 1 kg, energy content 19 MJ, water content 0.1236, wet mass 1.1236 kg
- inorganic nitrogen fertiliser, as N: 4.54595e-6, 8.13819e-5, 0.000575998, 4.69287e-5, 7.59221e-7, 0.000302233, 2.82364e-6, 1.66162e-5, 3.93436e-6, 0.00252276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 kg (28 suppliers, which the file names only by identifier); sum of these 0.00466616 kg; lognormal variance with pedigree 0.0452, pedigree (3,3,5,5,1)
  properties: dry mass 1 kg, wet mass 1 kg
- inorganic phosphorus fertiliser, as P2O5: 9.09629e-6, 1.15732e-5, 2.9879e-6, 7.65538e-7, 6.45845e-6, 0.00021393, 1.30972e-5, 5.98994e-6, 9.06181e-5, 4.27853e-7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 kg (28 suppliers, which the file names only by identifier); sum of these 0.00155539 kg; lognormal variance with pedigree 0.0452, pedigree (3,3,5,5,1)
  properties: dry mass 1 kg, wet mass 1 kg
- inorganic potassium fertiliser, as K2O: 2.47497e-5, 2.83672e-6, 3.38341e-8, 8.72884e-5, 3.03617e-6, 1.11831e-6, 1.63828e-7, 2.07813e-6, 2.59988e-6, 4.72787e-7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 kg (28 suppliers, which the file names only by identifier); sum of these 0.000644666 kg; lognormal variance with pedigree 0.0452, pedigree (3,3,5,5,1)
  properties: dry mass 1 kg, wet mass 1 kg
- limestone, crushed, washed: 0.00347851, 2.96598e-5 kg (2 suppliers, which the file names only by identifier); sum of these 0.00350817 kg; lognormal variance with pedigree 0.0127, pedigree (3,2,4,5,1)
  properties: carbon content, fossil 0.117257, dry mass 0.998 kg, water content 0.00200401, wet mass 1 kg
  note on carbon content, fossil: Table 3.1, ecoinvent v2.2 report 7, part VII, pg 3. MW CaCO3=100, MW MgCO3=84. C content of limestone is 0.117257 kg/kg DM
- magnesium oxide: 0.000444056 kg; lognormal variance with pedigree 0.0127, pedigree (3,2,4,5,1)
  properties: dry mass 1 kg, wet mass 1 kg
- maize grain, feed: 0.251246 kg; lognormal variance with pedigree 0.0107, pedigree (1,2,4,5,1)
  properties: carbon content, non-fossil 0.46957, dry mass 0.86 kg, water content 0.162791, wet mass 1 kg
- maize silage: 0.227744, 0.0105512 kg (2 suppliers, which the file names only by identifier); sum of these 0.238295 kg
  properties: carbon content, non-fossil 0.4773, dry mass 0.35 kg, energy content 6.6325 MJ, water content 1.85714, wet mass 1 kg
- manure, liquid, cattle: -1.48193 kg
  production volume
    Calculated from production volume of reference product using the relative outputs.
  properties: carbon content, non-fossil 0.68, dry mass 0.075 kg, price 0.0042 EUR2005, water content 12.333, wet mass 1 kg
- manure, solid, cattle: -1.16268 kg
  production volume
    Calculated from production volume of reference product using the relative outputs.
  properties: carbon content, non-fossil 0.441, dry mass 0.22 kg, price 0.0042 EUR2005, water content 3.5454, wet mass 1 kg
- oat grain: 0.00622171 kg; lognormal variance with pedigree 0.0113, pedigree (2,2,4,5,1)
  properties: carbon content, non-fossil 0.4916, dry mass 0.865 kg, water content 0.156069, wet mass 1 kg
  note on carbon content, non-fossil: biogene carbon content on a dry matter basis. Composition data obtained from http://ndb.nal.usda.gov/ndb/search/list (DB number: 20038, Oats). First, composition data were refered to 1 kg dry mass. Then, C-contents were calculated considering a C-content/dry mass of 46% in carbohydrates (including fibres), 53% in proteins and 75% in fats. All data from 'Evolutionary and Biochemical Aspects', A.D. Kay and T. Vrede (in Global Ecology, 2010, Elsevier B.V., S.E. Jørgensen Ed.).
- operation, housing system, cattle, loose, per animal unit: 1.44822e-5 unit; lognormal variance with pedigree 0.01, pedigree (1,1,4,5,1)
- operation, housing system, cattle, tied, per animal unit: 0.000143091 unit; lognormal variance with pedigree 0.01, pedigree (1,1,4,5,1)
- protein feed, 100% crude: 0.00687583 kg
  Protein provided by 0.015139176 kg DDGS through commercial dairy mix, assuming 0.38 kg crude protein/kg DDGS.
  properties: carbon content, non-fossil 0.53, dry mass 1 kg, wet mass 1 kg
- rape meal: 0.00717831 kg; lognormal variance with pedigree 0.0438, pedigree (2,3,5,5,1)
  properties: carbon content, non-fossil 0.457233, dry mass 0.9 kg, water content 0.111111, wet mass 1 kg
- selenium: 9.75924e-8 kg; lognormal variance with pedigree 0.0127, pedigree (3,2,4,5,1)
  properties: dry mass 1 kg, wet mass 1 kg
- sodium chloride, powder: 0.00182487 kg; lognormal variance with pedigree 0.0127, pedigree (3,2,4,5,1)
  properties: dry mass 1 kg, wet mass 1 kg
- soybean, feed: 0.114799 kg; lognormal variance with pedigree 0.0107, pedigree (1,2,4,5,1)
  properties: carbon content, non-fossil 0.52451, dry mass 0.89 kg, water content 0.1236, wet mass 1 kg
- straw: 0.0271978, 0.0271978 kg (2 suppliers, which the file names only by identifier); sum of these 0.0543955 kg; lognormal variance with pedigree 0.0113, pedigree (2,2,4,5,1)
  properties: carbon content, non-fossil 0.437377, dry mass 0.85 kg, heating value, net 14.25 MJ, water content 0.176471, wet mass 1 kg
  note on heating value, net: Literature value, Source: Phyllis2, database for (treated) biomass, algae, feedstocks for biogas production and biochar, https://phyllis.nl/Biomass/View/1271, ECN.TNO
- transport, passenger car, large size, petrol, EURO 4: 0.0107232 km; lognormal variance with pedigree 0.0507, pedigree (5,2,4,5,1)
- urea: 0.000600055, 0.000512405, 9.40786e-5 kg (3 suppliers, which the file names only by identifier); sum of these 0.00120654 kg; lognormal variance with pedigree 0.0438, pedigree (2,3,5,5,1)
  The exchange has been updated from 'urea, as N' into 'urea' and therefore its amount has been scaled (multiplied) from 0.0006 kg by 2.1438 kg of 'urea' per kg of 'urea, as N'.
  properties: carbon content, fossil 0.2, dry mass 1 kg, wet mass 1 kg
- wheat bran: 0.0239345 kg; lognormal variance with pedigree 0.0438, pedigree (2,3,5,5,1)
  properties: carbon content, non-fossil 0.475, dry mass 0.87 kg, water content 0.149425, wet mass 1 kg
  note on carbon content, non-fossil: Assumed carbon content, on a dry mass basis according to FAOSTAT. Reference: http://www.fao.org/forestry/17111/en
- wheat grain, feed: 0.00629008 kg; lognormal variance with pedigree 0.0113, pedigree (2,2,4,5,1)
  properties: carbon content, non-fossil 0.4646, dry mass 0.85 kg, water content 0.17647, wet mass 1 kg
- wood chips, dry, measured as dry mass: 0.0285304, 0.0285304 kg (2 suppliers, which the file names only by identifier); sum of these 0.0570607 kg; lognormal variance with pedigree 0.0113, pedigree (2,2,4,5,1)
  properties: carbon content, non-fossil 0.494, dry mass 1 kg, heating value, net 9.99 MJ, water content 0.4, wet mass 1.4 kg
  note on carbon content, non-fossil: C content of dry mass is 0.494 kgC/kg dry wood (ecoinvent v2.2 report 9).

## Inputs from nature
- Occupation, grassland, natural, for livestock grazing [natural resource, land]: 4.95267 m2*year; lognormal variance with pedigree 0.0466, pedigree (3,3,5,5,1)
- Occupation, pasture, man made [natural resource, land]: 9.02021 m2*year; lognormal variance with pedigree 0.0466, pedigree (3,3,5,5,1)
- Transformation, from grassland, natural (non-use) [natural resource, land]: 0.465592 m2; lognormal variance with pedigree 0.0526, pedigree (3,3,5,5,1)
- Transformation, to grassland, natural, for livestock grazing [natural resource, land]: 0.163725 m2; lognormal variance with pedigree 0.0526, pedigree (3,3,5,5,1)
- Transformation, to pasture, man made [natural resource, land]: 0.301868 m2; lognormal variance with pedigree 0.0526, pedigree (3,3,5,5,1)
- Water, unspecified natural origin [natural resource, in ground]: 0.0762343 m3; lognormal variance with pedigree 0.0438, pedigree (2,3,5,5,1)

## Emissions to nature
- Ammonia [air, non-urban air or from high stacks]: 0.00437608 kg; lognormal variance with pedigree 0.0521, pedigree (3,2,5,5,1)
- Dinitrogen monoxide [air, non-urban air or from high stacks]: 0.000488934 kg; lognormal variance with pedigree 0.0871, pedigree (3,2,5,5,4)
- Methane, non-fossil [air, non-urban air or from high stacks]: 0.0215428 kg; lognormal variance with pedigree 0.0521, pedigree (3,2,5,5,1)
- Water [air, unspecified]: 0.0111101 m3
- Nitrate [water, unspecified]: 0.00143259 kg; lognormal variance with pedigree 0.0906, pedigree (4,3,5,5,1)
- Phosphate [water, unspecified]: 0.000158608 kg; lognormal variance with pedigree 0.1226, pedigree (5,3,5,5,1)
- Water [water, surface water]: 0.0629572 m3

## Sampling procedure
Weighted average of data from Quebec and South Africa.

## Extrapolations
Modelling of animal direct emissions is described in the main source (Quantis, 2012). Feed includes all animal categories present on the dairy farm. Milk waste is accounted for, inherently, to satisfy milk production, while its disposal is added to manure output. No information was available for any other solid or liquid waste.
