# heat, from municipal waste incineration to generic market for heat district or industrial, other than natural gas

Dataset: EcoSpold 2, unit process
Geography: RoW
Time period: 2008-01-01 to 2022-12-31
Technology level: current
Classification: ISIC rev.4 ecoinvent: 3530:Steam and air conditioning supply
Synonyms: waste-to-energy; WTE
Scenario: Business-as-Usual
System model: Substitution, consequential, long-term
Share of production covered: 100 %
Generated by: Gabor Doka
Published in: Doka G. 2013
Database: ecoinvent
isCopyrightProtected: true

## General comment
This dataset changes the names of the (internally used) heat product of waste incineration and connects it with the external grid and the respective average energy markets (district heat grid).

## Reference product
- heat, for reuse in municipal waste incineration only: 1 MJ; name E_th_prod_MSWI; source Doka G. 2013; By-product classification allocatable product; CPC 17300: Steam and hot water; lognormal variance with pedigree 0.008, pedigree (1,1,4,1,1)
  useful heat produced in municipal waste incineration (internal)
  Uncertainty: a mere name exchange. There is no additonal uncertainty
  properties: carbon allocation 0 kg, carbon content 0, price 0 EUR2005

## Inputs from technosphere
- heat, district or industrial, other than natural gas: 0.998257, 0.00174314 MJ (2 suppliers, which the file names only by identifier); sum of these 1 MJ; = E_th_prod_MSWI; source Doka G. 2013
  Net heat from municipal waste incineration fed in to district heating grid
  production volume
    based on average net heat from Swiss municipal waste incineration fed in to district heating grid in 2011, and 200 Mio tonnes MSW incinerated annually worldwide in 2010 (Pike 2010).
  properties: heating value, net 1 MJ, price 0.0106 EUR2005

## Review by Emilia Moreno Ruiz 2013-02-21
Conecting DS from specific to generic market
