# phthalic anhydride production

Dataset: EcoSpold 2, unit process
Geography: RoW
Time period: 1995-01-01 to 2022-12-31
Technology level: current
Classification: ISIC rev.4 ecoinvent: 2011:Manufacture of basic chemicals
Classification: EcoSpold01Categories: chemicals/organics
Tags: ConvertedDataset
Scenario: Business-as-Usual
System model: Substitution, consequential, long-term
Generated by: Roland Hischier
Published in: Althaus H.-J. 2007
Database: ecoinvent
isCopyrightProtected: true

## General comment
The functional unit represent 1 kg of phthalic anhydride.
[This dataset was already contained in the ecoinvent database version 2. It was not individually updated during the transfer to ecoinvent version 3. Life Cycle Impact Assessment results may still have changed, as they are affected by changes in the supply chain, i.e. in other datasets. This dataset was generated following the ecoinvent quality guidelines for version 2. It may have been subject to central changes described in the ecoinvent version 3 change report (http://www.ecoinvent.org/database/ecoinvent-version-3/reports-of-changes/), and the results of the central updates were reviewed extensively. The changes added e.g. consistent water flows and other information throughout the database. The documentation of this dataset can be found in the ecoinvent reports of version 2, which are still available via the ecoinvent website. The change report linked above covers all central changes that were made during the conversion process.]

## Included activities end
Raw material and energy input, estimation of air emissions by using analogy to other process. Transports and Infrastructure estimated. Further inputs and solid wastes omitted.

## Geography
Data used are based actually on a Dutch and a US study. Data are used as European average data.

## Technology
no information given - assuming average Dutch technology in mid 90s

## Time period
date of publication of used literature

## Reference product
- phthalic anhydride: 1 kg; By-product classification allocatable product; CPC 34110: Hydrocarbons and their halogenated, sulphonated, nitrated or nitrosated derivatives; CAS 85-44-9
  EcoSpold01Location=RER
  production volume 2.291e9 kg
    Year 2000 production volumes from OECD SIDS Initial Assessment Report (http://www.inchem.org/documents/sids/sids/85449.pdf)
  property heating value, net 22.93 MJ
    LHV is calculated based on the elemental composition of the substance. Based on the CAS number of the substance (000085-44-9), the chemical formula of the substance is found to be: C8H4O3, (PubChem 2020).
    Reference: Kim, S., Chen, J., Cheng, T., Gindulyte, A., He, J., He, S., Li, Q., Shoemaker, B. A., Thiessen, P. A., Yu, B., Zaslavsky, L., Zhang, J., & Bolton, E. E. (2019). PubChem 2019 update: improved access to chemical data. Nucleic acids research, 47(D1), D1102–D1109. https://doi.org/10.1093/nar/gky1033
  property price 0.7 EUR2005
    Calculated value based on data from United Nations Commodity Trade Statistics Database (comtrade.un.org). UN comtrade category: 291735 Phthalic anhydride. Year 2005. Using exchange rate of 1EURO = 1.209 USD. Average of price of import into 5 main markets (EU, US, JP, IN and CN).
  properties: carbon allocation 0.648649 kg, carbon content 0.648649, carbon content, fossil 0.648649, carbon content, non-fossil 0, dry mass 1 kg, water content 0, water in wet mass 0 kg, wet mass 1 kg

## Inputs from technosphere
- chemical factory, organics: 4e-10 unit; lognormal variance with pedigree 0.588, pedigree (4,5,5,5,5)
  Estimation
  EcoSpold01Location=RER
  Uncertainty: estimation
- electricity, medium voltage: 0.0476491, 0.0330108, 0.00176936, 0.393137, 0.0017828, 0.0226511 kWh (6 suppliers, which the file names only by identifier); sum of these 0.5 kWh; lognormal variance with pedigree 0.0632, pedigree (2,3,5,5,1)
  Data from literature (von Däniken 1995)
  EcoSpold01Location=UCTE
  Uncertainty: data from literature (von Däniken 1995)
- heat, district or industrial, natural gas: 0.436805, 2.87869 MJ (2 suppliers, which the file names only by identifier); sum of these 3.3155 MJ; lognormal variance with pedigree 0.0632, pedigree (2,3,5,5,1)
  EcoSpold01Location=RER
  Data from literature (von Däniken 1995)
  Uncertainty: data from literature (von Däniken 1995)
  properties: heating value, net 1 MJ
- heat, district or industrial, other than natural gas: 3.45207, 0.00602794 MJ (2 suppliers, which the file names only by identifier); sum of these 3.4581 MJ; lognormal variance with pedigree 0.0632, pedigree (2,3,5,5,1)
  (same comment as for heat, district or industrial, natural gas)
  properties: heating value, net 1 MJ
- xylene: 0.95 kg; lognormal variance with pedigree 0.0632, pedigree (2,3,5,5,1)
  (same comment as for heat, district or industrial, natural gas)
  properties: carbon content, fossil 0.905061, dry mass 1 kg, heating value, net 38.84 MJ, wet mass 1 kg

## Emissions to nature
- Carbon monoxide, fossil [air, urban air close to ground]: 0.00696 kg; lognormal variance with pedigree 0.7032, pedigree (2,3,5,5,1)
  Data from literature (von Däniken 1995)
  Uncertainty: data from literature (von Däniken 1995)
- NMVOC, non-methane volatile organic compounds [air, urban air close to ground]: 0.00462 kg; lognormal variance with pedigree 0.0932, pedigree (2,3,5,5,1)
  (same comment as for Carbon monoxide, fossil)
- Nitrogen oxides [air, urban air close to ground]: 0.0004 kg; lognormal variance with pedigree 0.0932, pedigree (2,3,5,5,1)
  (same comment as for Carbon monoxide, fossil)
- Particulate Matter, < 2.5 um [air, urban air close to ground]: 0.000202 kg; lognormal variance with pedigree 0.3632, pedigree (2,3,5,5,1)
  (same comment as for Carbon monoxide, fossil)
- Particulate Matter, > 2.5 um and < 10um [air, urban air close to ground]: 6.75e-5 kg; lognormal variance with pedigree 0.1832, pedigree (2,3,5,5,1)
  (same comment as for Carbon monoxide, fossil)
- Sulfur dioxide [air, urban air close to ground]: 0.00176 kg; lognormal variance with pedigree 0.0632, pedigree (2,3,5,5,1)
  (same comment as for Carbon monoxide, fossil)
- Ammonium [water, surface water]: 0.00034 kg; lognormal variance with pedigree 0.0932, pedigree (2,3,5,5,1)
  (same comment as for Carbon monoxide, fossil)
- BOD5, Biological Oxygen Demand [water, surface water]: 0.00011 kg; lognormal variance with pedigree 0.0932, pedigree (2,3,5,5,1)
  (same comment as for Carbon monoxide, fossil)
- COD, Chemical Oxygen Demand [water, surface water]: 0.00063 kg; lognormal variance with pedigree 0.0932, pedigree (2,3,5,5,1)
  (same comment as for Carbon monoxide, fossil)
- DOC, Dissolved Organic Carbon [water, surface water]: 0.000233333 kg; lognormal variance with pedigree 0.0932, pedigree (2,3,5,5,1)
  Calculated as equal to TOC.
  Uncertainty: data from literature (von Däniken 1995)
- Suspended solids, unspecified [water, surface water]: 0.00018 kg; lognormal variance with pedigree 0.0932, pedigree (2,3,5,5,1)
  (same comment as for Carbon monoxide, fossil)
- TOC, Total Organic Carbon [water, surface water]: 0.000233333 kg; lognormal variance with pedigree 0.0932, pedigree (2,3,5,5,1)
  Calculated by default as TOC (gC) = COD/2.7 (COD measured in g O2). Should more correctly be calculated from the carbon content of the specified emissions to water.
  Uncertainty: data from literature (von Däniken 1995)

## Sampling procedure
literature and estimations out of similar processes

## Extrapolations
see geography This dataset has been copied from an original dataset covering the geography RER. The uncertainty has been adjusted accordingly.

## Review by Heiko Kunst 2003-07-07
Passed.
