# treatment of municipal solid waste, municipal incineration with fly ash extraction

Dataset: EcoSpold 2, unit process
Geography: CH
Time period: 2006-01-01 to 2022-12-31
Technology level: current
Classification: ISIC rev.4 ecoinvent: 3821:Treatment and disposal of non-hazardous waste
Synonyms: municipal waste incineration
Scenario: Business-as-Usual
System model: Substitution, consequential, long-term
Share of production covered: 1.8 %
Generated by: Gabor Doka
Published in: Doka G. 2015
Database: ecoinvent
isCopyrightProtected: true

## General comment
This dataset represents the activity of waste disposal of municipal solid waste in a municipal solid waste incinerator (MSWI) // Recommended use of this dataset: For average municipal/communal waste mixture. Not suitable to represent any single specific waste material, like plastics, paper, cardboard. If your waste is a specific mixture of waste materials, inventory the respective waste materials individually. // Inventoried waste contains 92.8% average municipal solid waste, burnable part; 7.23% average municipal solid waste, unburnable (inert) part; . // Waste composition (wet, in ppm): upper heating value 13.05 MJ/kg; lower heating value 11.7 MJ/kg; H2O 225260; O 261060; H 43105; C 338960; S 1532.3; N 3206.1; P 757.42; B 7.3826; Cl 6670; Br 129.32; F 366.39; I 0.012418; Ag 0.73279; As 1.4061; Ba 152.96; Cd 8.0053; Co 1.3807; Cr 139.58; Cu 930.87; Hg 0.65684; Mn 266.19; Mo 2.0065; Ni 52.342; Pb 413.61; Sb 53.368; Se 0.3281; Sn 99.553; V 9.4572; Zn 1127.9; Be 470.85; Sc n.a.; Sr n.a.; Ti 2616.4; Tl n.a.; W n.a.; Si 49786; Fe 23628; Ca 18346; Al 11395; K 2132.7; Mg 2568.9; Na 4741.6; // Share of carbon in waste that is biogenic 61.1%. // Share of metals in waste not oxidised and bulk-recyclable (exclude very small or thin parts) Iron: 72.06%; Alu: 38.71%; Copper: 45.44%. // Recovery of metal scrap from bottom ash to recycling: 9.7909g iron scrap, 1.2162g aluminium scrap, 0.12319g copper scrap. From this waste, the FLUWA process in the technology mix recovers 0.000958kg (DM) of a hydroxide sludge to be recycled in zinc furnaces. // Ultimately one kg of this waste produces 0.2253 kg of bottom ash (can include some washed ash) and 0.01196 kg of residues, which are landfilled (technology mix). Additional solidification of residues with 0.004785 kg of cement.Net energy production: 1.39MJ/kg electric energy and 2.85MJ/kg thermal energy. //

## Included activities start
waste incineration from waste reception gate and delivery into waste bunker at incinerator plant site (without transports to the incinerator)

## Included activities end
Waste-specific short-term emissions to water from leachate. Long-term emissions from landfill to ground water.

## Geography
Specific to the technology mix encountered in Switzerland in 2012.

## Technology
average Swiss MSWI plants in 2010 (grate incinerators) with electrostatic precipitator for fly ash (ESP), wet flue gas scrubber and 25% SNCR , 42.77% SCR-high dust , 32.68% SCR-low dust -DeNOx facilities and 0% without Denox (weighted according to mass of burnt waste, representing Swiss average). Efficiency of iron scrap separation from slag : 58%. Efficiency of non-ferrous scrap separation from slag : 31%. The technology mix for this dataset includes a filter ash treatment (FLUWA) of a share of 46.22%. Gross electric efficiency technology mix 15.84% and Gross thermal efficiency technology mix 28.51%

## Time period
Waste composition as given in literature reference, theoretical data or other source. Transfer coefficients for modern MSWI.

## Reference product
- municipal solid waste: -1 kg; name RP_amount_1; By-product classification Waste; CPC 39910: Municipal waste
  Main reference product of this activity (supply of disposal service).
  production volume 3.0215e9 kg
    based on corresponding global production volume of MSW fraction in conventional MSWI (wo fly ash extraction) and scaled down to annual Swiss incinerated MSW mass of 3.02 mio. tonnes.
  property heating value, net 11.74 MJ
    Value taken from the general comment of the treatment dataset.
  property price 0 EUR2005
    Waste products are assigned a price of zero as they are assumed to require further treatment.
  properties: aluminium content 0.014708, antimony content 6.8886e-5, arsenic content 1.8149e-6, barium content 0.00019744, beryllium content 0.00060775, boron content 9.5291e-6, bromine content 0.00016692, cadmium content 1.0333e-5, calcium content 0.023681, carbon allocation 0.338964 kg, carbon content 0.43752, carbon content, fossil 0.17, carbon content, non-fossil 0.26752, chlorine content 0.0086094, chromium content 0.00018016, cobalt content 1.7821e-6, copper content 0.0012015, dry mass 0.77474 kg, fluorine content 0.00047293, hydrogen content 0.055639, iodine content 1.6029e-8, iron content 0.030498, lead content 0.00053387, magnesium content 0.0033158, manganese content 0.00034358, mercury content 8.4783e-7, molybdenum content 2.5899e-6, nickel content 6.7561e-5, nitrogen content 0.0041383, oxygen content 0.33696, phosphorus content 0.00097765, potassium content 0.0027528, selenium content 4.235e-7, silicon content 0.064262, silver content 9.4586e-7, sodium content 0.0061203, sulfur content 0.0019778, tin content 0.0001285, titanium content 0.0033771, vanadium content 1.2207e-5, water content 0.29076, water in wet mass 0.22526 kg, wet mass 1 kg, zinc content 0.0014559

## Inputs from technosphere
- aluminium scrap, post-consumer, prepared for melting: -0.0012162 kg; lognormal variance with pedigree 0.3618, pedigree (1,1,1,1,1)
  Aluminium scrap recovered from this waste.
  Uncertainty: uncertainty calculated from uncertainty in waste composition, uncertainty of share of recyclable metal, uncertainty of transfer coefficient to bottom ash, uncertainty of the efficiency of scrap removal in MSWI plant.
  production volume
    calculated in proportion to reference product waste input to incinerator
  properties: dry mass 1 kg, price 0.806 EUR2005, wet mass 1 kg
- ammonia, anhydrous, liquid: 0.00069897 kg; lognormal variance with pedigree 0.6768, pedigree (1,1,4,1,1)
  Input to DeNOx stage (100% NH3).
  Uncertainty: uncertainty calculated from uncertainty in average DeNOx input, uncertainty in the share of thermal NOx, uncertainty of nitrogen content in average municipal waste and the uncertainty in nitrogen content in *this* waste.
  properties: dry mass 1 kg, wet mass 1 kg
- cationic resin: 3.2957e-6 kg; lognormal variance with pedigree 1.6305, pedigree (1,1,4,1,1)
  Auxilliary input for mercury removal in filter ash treatment (FLUWA).
  Uncertainty: uncertainty calculated from uncertainty in of transfer coefficients in the incinerator, and the uncertainty of the waste composition of this waste
  properties: carbon content, fossil 0.521606, dry mass 0.5 kg, heating value, net 6.68 MJ, water content 1, wet mass 1 kg
- cement, unspecified: 0.0047847 kg; lognormal variance with pedigree 0.037053, pedigree (1,1,4,1,1)
  Cement required for solidification of landfilled residual material.
  Uncertainty: Uncertainty calculated from uncertainty of the waste composition of this waste, of transfer coefficients in the incinerator and of the solidification recipe.
  properties: dry mass 1 kg, wet mass 1 kg
- chemical, inorganic: 0.00011725 kg; lognormal variance with pedigree 0.28328, pedigree (1,1,4,1,1)
  Auxilliary inputs for the wastewater treatment stage of the incinerator plant. Proxy for Polyelectrolyte.
  Uncertainty: uncertainty calculated from uncertainty in average Polyelectrolyte input, of transfer coefficients in the incinerator, and the uncertainty of the waste composition of this waste
  properties: carbon content, fossil 0.003, dry mass 1 kg, wet mass 1 kg
- chemical, organic: 6.906e-6 kg; lognormal variance with pedigree 1.4089, pedigree (1,1,4,1,1)
  Auxilliary inputs for the wastewater treatment stage of the incinerator plant. Proxy for (pure) Trisodium-trimercapto-s-triazine (CAS 17766-26-6), used as 15% diluted solution, aka TMT15.
  Uncertainty: uncertainty calculated from uncertainty in average TMT15 input, of transfer coefficients in the incinerator, and the uncertainty of the waste composition of this waste
  properties: carbon content, fossil 0.628, dry mass 1 kg, heating value, net 19.03 MJ, wet mass 1 kg
- chromium oxide, flakes: 8.9372e-7 kg; lognormal variance with pedigree 1.018, pedigree (1,1,4,1,1)
  Input to DeNOx stage. Active component in SCR catalyst (vanadium pentoxide, V2O5), here approximated with the available chromium trioxide.
  Uncertainty: uncertainty calculated from uncertainty in average DeNOx input, uncertainty in the share of thermal NOx, uncertainty of nitrogen content in average municipal waste and the uncertainty in nitrogen content in *this* waste.
  properties: dry mass 1 kg, wet mass 1 kg
- copper scrap, sorted, pressed: -0.00012319 kg; lognormal variance with pedigree 0.67692, pedigree (1,1,1,1,1)
  Copper scrap recovered from this waste.
  Uncertainty: uncertainty calculated from uncertainty in waste composition, uncertainty of share of recyclable metal, uncertainty of transfer coefficient to bottom ash, uncertainty of the efficiency of scrap removal in MSWI plant.
  production volume
    calculated in proportion to reference product waste input to incinerator
  properties: dry mass 1 kg, price 2.84 EUR2005, wet mass 1 kg
- electricity, for reuse in municipal waste incineration only: -0.38711 kWh; name E_el_prod_MSWI; lognormal variance with pedigree 0.17857, pedigree (1,1,1,1,1)
  Net electricity generated from this waste and used in internal MSWI plant energy redistribution.
  Uncertainty: uncertainty is calculated from uncertainties in waste composition and uncertainties in energy efficiency and the uncertainty in internal energy demand
  production volume
    calculated in proportion to reference product waste input to incinerator
  property exergy 3.6 MJ; name E_el_prod_MSWI_exergy
  property true value relation 3.6; name E_el_prod_MSWI_true_value_relation
  properties: price 0.1 EUR2005
  note on exergy: This exergy property is based on the exergy content of the product.
- heat, district or industrial, natural gas: 0.13071 MJ; lognormal variance with pedigree 0.6768, pedigree (1,1,4,1,1)
  Input to DeNOx stage, to heat up flue gas in low-dust SCR.
  Uncertainty: uncertainty calculated from uncertainty in average DeNOx input, uncertainty in the share of thermal NOx, uncertainty of nitrogen content in average municipal waste and the uncertainty in nitrogen content in *this* waste.
  properties: heating value, net 1 MJ
- heat, for reuse in municipal waste incineration only: -2.8505 MJ; name E_th_prod_MSWI; lognormal variance with pedigree 0.11308, pedigree (1,1,1,1,1)
  Net useful heat generated from this waste and used in internal MSWI plant energy redistribution.
  Uncertainty: uncertainty is calculated from uncertainties in waste composition and uncertainties in energy efficiency and the uncertainty in internal energy demand
  production volume
    calculated in proportion to reference product waste input to incinerator
  property exergy 0.1842 MJ; name E_th_prod_MSWI_exergy
  property true value relation 0.1842; name E_th_prod_MSWI_true_value_relation
  properties: price 0.0106 EUR2005
- hydrochloric acid, without water, in 30% solution state: 0.00035657 kg; lognormal variance with pedigree 0.033113, pedigree (1,1,4,1,1)
  Auxilliary inputs for the wastewater treatment stage of the incinerator plant.
  Uncertainty: uncertainty calculated from uncertainty in average HCl input, of transfer coefficients in the incinerator, and the uncertainty of the waste composition of this waste
  properties: dry mass 1 kg, heating value, net 3.32 MJ, wet mass 1 kg
- hydrogen peroxide, without water, in 50% solution state: 0.00082909 kg; lognormal variance with pedigree 0.035162, pedigree (1,1,4,1,1)
  Auxilliary oxidising agent for filter ash treatment (FLUWA).
  Uncertainty: uncertainty calculated from uncertainty in of transfer coefficients in the incinerator, and the uncertainty of the waste composition of this waste
  properties: dry mass 1 kg, heating value, net 7.13 MJ, wet mass 1 kg
- iron (III) chloride, without water, in 40% solution state: 3.2056e-5 kg; lognormal variance with pedigree 0.24523, pedigree (1,1,4,1,1)
  Auxilliary inputs for the wastewater treatment stage of the incinerator plant.
  Uncertainty: uncertainty calculated from uncertainty in average FeCl3 input, of transfer coefficients in the incinerator, and the uncertainty of the waste composition of this waste
  properties: dry mass 1 kg, wet mass 1 kg
- iron scrap, sorted, pressed: -0.0097909 kg; lognormal variance with pedigree 0.27771, pedigree (1,1,1,1,1)
  Iron scrap recovered from this waste.
  Uncertainty: uncertainty calculated from uncertainty in waste composition, uncertainty of share of recyclable metal, uncertainty of transfer coefficient to bottom ash, uncertainty of the efficiency of scrap removal in MSWI plant.
  production volume
    calculated in proportion to reference product waste input to incinerator
  properties: dry mass 1 kg, price 0.175 EUR2005, wet mass 1 kg
- metalliferous hydroxide sludge: -0.0038323 kg; lognormal variance with pedigree 0.048734, pedigree (1,1,1,1,1)
  Metalliferous hydroxide sludge from filter ash leaching (FLUWA).
  Uncertainty: uncertainty is calculated from uncertainties in waste composition and transfer coefficients to filter ash in incinerator and the uncertainty of the transfer coefficients of the FLUWA process.
  production volume
    calculated in proportion to reference product waste input to incinerator
  properties: calcium content 0.12091, carbon content, non-fossil 0.011195, chlorine content 0.15106, dry mass 0.25 kg, oxygen content 0.38054, phosphorus content 0.015362, potassium content 0.014118, sodium content 0.024389, sulfur content 0.092024, water content 3, wet mass 1 kg, zinc content 0.15558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
- municipal waste incineration facility: 2.5e-10 unit
  Demands per kilogram waste.
- process-specific burdens, residual material landfill: 0.023849 kg; lognormal variance with pedigree 0.027969, pedigree (1,1,4,1,1)
  Mass-specific expenditures required for landfilling of incineration residues.;activityLink introduced to establish a direct link to the corresponding regional supply of this product
  Uncertainty: uncertainty is calculated from uncertainties in waste composition and transfer coefficients in incinerator
- process-specific burdens, slag landfill: 0.22529 kg; lognormal variance with pedigree 0.031999, pedigree (1,1,4,1,1)
  Mass-specific expenditures required for landfilling of bottom ash.;activityLink introduced to establish a direct link to the corresponding regional supply of this product
  Uncertainty: uncertainty is calculated from uncertainties in waste composition and transfer coefficients in incinerator
- quicklime, milled, packed: 0.0028144 kg; lognormal variance with pedigree 0.49467, pedigree (1,1,4,1,1)
  Auxilliary inputs for the flue gas treatment stage of the incinerator plant.
  Uncertainty: uncertainty calculated from uncertainty in average CaO input, of transfer coefficients in the incinerator, and the uncertainty of the waste composition of this waste
  properties: dry mass 0.99 kg, water content 0.010101, wet mass 1 kg
- residual material landfill: 4.9685e-11 unit; lognormal variance with pedigree 0.027969, pedigree (1,1,4,1,1)
  Landfill infrastructure required for landfilling of incineration residues.
  Uncertainty: uncertainty is calculated from uncertainties in waste composition and transfer coefficients in incinerator
- slag landfill: 4.0052e-10 unit; lognormal variance with pedigree 0.031999, pedigree (1,1,4,1,1)
  Landfill infrastructure required for landfilling of bottom ash.
  Uncertainty: uncertainty is calculated from uncertainties in waste composition and transfer coefficients in incinerator
- sodium hydroxide, without water, in 50% solution state: 0.0013585 kg; lognormal variance with pedigree 0.16709, pedigree (1,1,4,1,1)
  Auxilliary inputs for the flue gas treatment stage of the incinerator plant, and partially in the filter ash treatment (FLUWA).
  Uncertainty: uncertainty calculated from uncertainty in average NaOH input, of transfer coefficients in the incinerator, and the uncertainty of the waste composition of this waste
  properties: dry mass 1 kg, heating value, net 3.03 MJ, wet mass 1 kg
- spent activated carbon with mercury: -3.4691e-6 kg; name BP_amount_1; lognormal variance with pedigree 1.6225, pedigree (1,1,1,1,1)
  Spent ion exchanger charged with mercury, from FLUWA filter ash treatment, approximated here with Spent activated carbon with mercury, deposited undergound in a polyethylene Big Bag.
  Uncertainty: uncertainty calculated from uncertainty in of transfer coefficients in the incinerator, and the uncertainty of the waste composition of this waste.
  production volume
    Calculated from production volume of reference product using the relative outputs.
  properties: carbon content, fossil 0.6, dry mass 1 kg, heating value, net 18.18 MJ, wet mass 1 kg
- titanium dioxide: 4.3792e-5 kg; lognormal variance with pedigree 1.018, pedigree (1,1,4,1,1)
  Input to DeNOx stage (TiO2 catalyst carrier)
  Uncertainty: uncertainty calculated from uncertainty in average DeNOx input, uncertainty in the share of thermal NOx, uncertainty of nitrogen content in average municipal waste and the uncertainty in nitrogen content in *this* waste.
  properties: dry mass 1 kg, wet mass 1 kg
- transport, freight, lorry, unspecified: 0.0097521 metric ton*km; lognormal variance with pedigree 0.028598, pedigree (1,1,4,1,1)
  Transport services to transport incineration residues to landfills and filter ash to external treatments (FLUWA).
  Uncertainty: uncertainty calculated from uncertainty of the waste composition of this waste, uncertainty of transfer coefficients and the uncertainty in generic transportation distances
- waste cement, hydrated: -0.011962 kg; lognormal variance with pedigree 0.029053, pedigree (1,1,1,1,1)
  Hydrated cement output for solidification of landfilled residual material.
  Uncertainty: Uncertainty calculated from uncertainty of the waste composition of this waste and transfer coefficients in the incinerator and of the solidification recipe.
  production volume
    calculated in proportion to reference product waste input to incinerator
  properties: dry mass 1 kg, wet mass 1 kg
- water, decarbonised: 1.39 kg; lognormal variance with pedigree 0.24523, pedigree (1,1,4,1,1)
  Incinerator process water used in flue gas scrubber stage.
  Uncertainty: uncertainty calculated from uncertainty in average water input, and the uncertainty of the waste composition of this waste
  properties: wet mass 1 kg

## Inputs from nature
- Oxygen [natural resource, in air]: 1.0755 kg; lognormal variance with pedigree 0.038318, pedigree (1,1,4,1,1)
  Oxygen from ambient air needed to combust and oxidise this waste. Net demand, i.e. without O2 leaving the plant in flue gas uncombusted.
  Uncertainty: uncertainty is calculated from uncertainties in waste composition and transfer coefficients to flue gas and soild residues in incinerator

## Emissions to nature
- Aluminium III [air, urban air close to ground]: 5.6947e-9 kg; lognormal variance with pedigree 0.43353, pedigree (1,1,4,1,1)
  Emission to air from waste composition and transfer coefficients.
  Uncertainty: uncertainty is calculated from uncertainties in waste composition and transfer coefficients in incinerator
- Ammonia [air, urban air close to ground]: 8.2181e-7 kg; lognormal variance with pedigree 0.72931, pedigree (1,1,4,1,1)
  Nitrogen species emitted to air after DeNOx stage.
  Uncertainty: uncertainty calculated from uncertainty in average N-emissions and uncertainty in the share of thermal NOx and the uncertainty in nitrogen content in *this* waste.
- Antimony ion [air, urban air close to ground]: 2.6684e-11 kg; lognormal variance with pedigree 1.1269, pedigree (1,1,4,1,1)
  (same comment as for Aluminium III)
- Arsenic ion [air, urban air close to ground]: 7.9133e-9 kg; lognormal variance with pedigree 1.5416, pedigree (1,1,4,1,1)
  (same comment as for Aluminium III)
- Barium II [air, urban air close to ground]: 1.4517e-7 kg; lognormal variance with pedigree 0.9357, pedigree (1,1,4,1,1)
  (same comment as for Aluminium III)
- Benzene [air, urban air close to ground]: 3.4247e-8 kg; lognormal variance with pedigree 0.10952, pedigree (1,1,4,1,1)
  Incomplete combustion product emitted to air.
  Uncertainty: uncertainty calculated from uncertainty in average operation emissions, and the uncertainty of the flue gas volume from this waste.
- Benzene, hexachloro- [air, urban air close to ground]: 7.1609e-11 kg; lognormal variance with pedigree 0.10952, pedigree (1,1,4,1,1)
  (same comment as for Benzene)
- Benzene, pentachloro- [air, urban air close to ground]: 1.8094e-10 kg; lognormal variance with pedigree 0.10952, pedigree (1,1,4,1,1)
  (same comment as for Benzene)
- Benzo(a)pyrene [air, urban air close to ground]: 7.6211e-13 kg; lognormal variance with pedigree 0.45049, pedigree (1,1,4,1,1)
  (same comment as for Benzene)
- Bromine [air, urban air close to ground]: 6.4593e-8 kg; lognormal variance with pedigree 0.95777, pedigree (1,1,4,1,1)
  (same comment as for Aluminium III)
- Cadmium II [air, urban air close to ground]: 4.0205e-9 kg; lognormal variance with pedigree 1.3318, pedigree (1,1,4,1,1)
  (same comment as for Aluminium III)
- Calcium [air, urban air close to ground]: 9.0376e-5 kg; lognormal variance with pedigree 0.31479, pedigree (1,1,4,1,1)
  (same comment as for Aluminium III)
- Carbon dioxide, fossil [air, urban air close to ground]: 0.47757 kg; lognormal variance with pedigree 0.039966, pedigree (1,1,4,1,1)
  (same comment as for Aluminium III)
- Carbon dioxide, non-fossil [air, urban air close to ground]: 0.75153 kg; lognormal variance with pedigree 0.039966, pedigree (1,1,4,1,1)
  (same comment as for Aluminium III)
- Carbon monoxide, fossil [air, urban air close to ground]: 2.262e-5 kg; lognormal variance with pedigree 0.85553, pedigree (1,1,4,1,1)
  (same comment as for Benzene)
- Carbon monoxide, non-fossil [air, urban air close to ground]: 3.5596e-5 kg; lognormal variance with pedigree 0.85553, pedigree (1,1,4,1,1)
  (same comment as for Benzene)
- Chromium III [air, urban air close to ground]: 2.1464e-8 kg; lognormal variance with pedigree 0.95777, pedigree (1,1,4,1,1)
  (same comment as for Aluminium III)
- Cobalt II [air, urban air close to ground]: 1.2717e-9 kg; lognormal variance with pedigree 1.5559, pedigree (1,1,4,1,1)
  (same comment as for Aluminium III)
- Copper ion [air, urban air close to ground]: 4.6516e-8 kg; lognormal variance with pedigree 0.71624, pedigree (1,1,4,1,1)
  (same comment as for Aluminium III)
- Cyanide [air, urban air close to ground]: 1.0273e-5 kg; lognormal variance with pedigree 1.2898, pedigree (1,1,4,1,1)
  (same comment as for Ammonia)
- Dinitrogen monoxide [air, urban air close to ground]: 4.7817e-5 kg; lognormal variance with pedigree 1.2898, pedigree (1,1,4,1,1)
  (same comment as for Ammonia)
- Dioxins, measured as 2,3,7,8-tetrachlorodibenzo-p-dioxin [air, urban air close to ground]: 6.8489e-14 kg; lognormal variance with pedigree 0.45049, pedigree (1,1,4,1,1)
  (same comment as for Benzene)
- Heat, waste [air, urban air close to ground]: 9.572 MJ; lognormal variance with pedigree 0.0645, pedigree (1,1,4,1,1)
  Waste heat generated from heating value of this waste plus any electricity required to process it.
  Uncertainty: uncertainty is calculated from uncertainties in waste composition and uncertainties in energy efficiency and the uncertainty in internal energy demand
- Hydrochloric acid [air, urban air close to ground]: 3.4257e-6 kg; lognormal variance with pedigree 0.44836, pedigree (1,1,4,1,1)
  (same comment as for Aluminium III)
- Hydrogen fluoride [air, urban air close to ground]: 2.4719e-6 kg; lognormal variance with pedigree 0.80868, pedigree (1,1,4,1,1)
  (same comment as for Aluminium III)
- Iodine [air, urban air close to ground]: 6.8922e-12 kg; lognormal variance with pedigree 1.9506, pedigree (1,1,4,1,1)
  (same comment as for Aluminium III)
- Iron ion [air, urban air close to ground]: 1.1832e-8 kg; lognormal variance with pedigree 0.35349, pedigree (1,1,4,1,1)
  (same comment as for Aluminium III)
- Lead II [air, urban air close to ground]: 2.0575e-8 kg; lognormal variance with pedigree 0.81829, pedigree (1,1,4,1,1)
  (same comment as for Aluminium III)
- Magnesium [air, urban air close to ground]: 2.0069e-6 kg; lognormal variance with pedigree 0.56554, pedigree (1,1,4,1,1)
  (same comment as for Aluminium III)
- Manganese II [air, urban air close to ground]: 8.9524e-9 kg; lognormal variance with pedigree 0.88427, pedigree (1,1,4,1,1)
  (same comment as for Aluminium III)
- Mercury II [air, urban air close to ground]: 1.8438e-8 kg; lognormal variance with pedigree 1.6346, pedigree (1,1,4,1,1)
  (same comment as for Aluminium III)
- Methane, fossil [air, urban air close to ground]: 1.996e-7 kg; lognormal variance with pedigree 0.10952, pedigree (1,1,4,1,1)
  (same comment as for Benzene)
- Methane, non-fossil [air, urban air close to ground]: 3.141e-7 kg; lognormal variance with pedigree 0.10952, pedigree (1,1,4,1,1)
  (same comment as for Benzene)
- Molybdenum VI [air, urban air close to ground]: 1.3371e-9 kg; lognormal variance with pedigree 1.5056, pedigree (1,1,4,1,1)
  (same comment as for Aluminium III)
- NMVOC, non-methane volatile organic compounds [air, urban air close to ground]: 1.5586e-6 kg; lognormal variance with pedigree 0.10952, pedigree (1,1,4,1,1)
  (same comment as for Benzene)
- Nickel II [air, urban air close to ground]: 3.33e-8 kg; lognormal variance with pedigree 1.0755, pedigree (1,1,4,1,1)
  (same comment as for Aluminium III)
- Nitrogen oxides [air, urban air close to ground]: 0.00026024 kg; lognormal variance with pedigree 0.72931, pedigree (1,1,4,1,1)
  Sum of fuel-Nox and thermal-NOx emitted to air after DeNOx stage.
  Uncertainty: uncertainty calculated from uncertainty in average N-emissions and uncertainty in the share of thermal NOx and the uncertainty in nitrogen content in *this* waste.
- Particulate Matter, < 2.5 um [air, urban air close to ground]: 4.0888e-6 kg; lognormal variance with pedigree 0.45049, pedigree (1,1,4,1,1)
  (same comment as for Benzene)
- Particulate Matter, > 2.5 um and < 10um [air, urban air close to ground]: 2.0547e-8 kg; lognormal variance with pedigree 0.22188, pedigree (1,1,4,1,1)
  (same comment as for Benzene)
- Phenol, pentachloro- [air, urban air close to ground]: 1.4914e-11 kg; lognormal variance with pedigree 0.10952, pedigree (1,1,4,1,1)
  (same comment as for Benzene)
- Phosphorus [air, urban air close to ground]: 7.6203e-7 kg; lognormal variance with pedigree 0.72349, pedigree (1,1,4,1,1)
  (same comment as for Aluminium III)
- Potassium I [air, urban air close to ground]: 1.0506e-5 kg; lognormal variance with pedigree 0.57972, pedigree (1,1,4,1,1)
  (same comment as for Aluminium III)
- Selenium IV [air, urban air close to ground]: 3.7185e-9 kg; lognormal variance with pedigree 1.7268, pedigree (1,1,4,1,1)
  (same comment as for Aluminium III)
- Silicon [air, urban air close to ground]: 2.4893e-8 kg; lognormal variance with pedigree 0.27099, pedigree (1,1,4,1,1)
  (same comment as for Aluminium III)
- Sodium [air, urban air close to ground]: 2.3358e-5 kg; lognormal variance with pedigree 0.48153, pedigree (1,1,4,1,1)
  (same comment as for Aluminium III)
- Sulfur dioxide [air, urban air close to ground]: 1.5247e-5 kg; lognormal variance with pedigree 0.62236, pedigree (1,1,4,1,1)
  (same comment as for Aluminium III)
- Tin ion [air, urban air close to ground]: 4.9776e-11 kg; lognormal variance with pedigree 1.046, pedigree (1,1,4,1,1)
  (same comment as for Aluminium III)
- Titanium ion [air, urban air close to ground]: 1.3305e-6 kg; lognormal variance with pedigree 0.56554, pedigree (1,1,4,1,1)
  (same comment as for Aluminium III)
- Toluene [air, urban air close to ground]: 6.8494e-8 kg; lognormal variance with pedigree 0.10952, pedigree (1,1,4,1,1)
  (same comment as for Benzene)
- Vanadium V [air, urban air close to ground]: 3.5323e-8 kg; lognormal variance with pedigree 1.2954, pedigree (1,1,4,1,1)
  (same comment as for Aluminium III)
- Water [air, urban air close to ground]: 0.00146718 m3; lognormal variance with pedigree 0.68221, pedigree (1,1,4,1,1)
  Water vapour from waste humidity, hydrogen oxidation and part of the process water.
  Uncertainty: Uncertainty calculated from uncertainty in waste composition, process water input and the uncertainty of fraction to air.
- Zinc II [air, urban air close to ground]: 5.6648e-7 kg; lognormal variance with pedigree 0.67282, pedigree (1,1,4,1,1)
  (same comment as for Aluminium III)
- Aluminium III [water, ground-, long-term]: 0.0080064 kg; lognormal variance with pedigree 0.35002, pedigree (1,1,4,1,1)
  Long-term emissions from landfilling of incineration residues.
  Uncertainty: uncertainty is calculated from uncertainties in waste composition and transfer coefficients in incinerator and landfills.
- Aluminium III [water, surface water]: 5.6925e-7 kg; lognormal variance with pedigree 0.73304, pedigree (1,1,4,1,1)
  Emissions to water from waste composition and transfer coefficients in incinerator and landfills.
  Uncertainty: uncertainty is calculated from uncertainties in waste composition and transfer coefficients in incinerator and landfills
- Antimony ion [water, ground-, long-term]: 1.642e-5 kg; lognormal variance with pedigree 1.00139, pedigree (1,1,4,1,1)
  (same comment as for Aluminium III)
- Antimony ion [water, surface water]: 6.5604e-6 kg; lognormal variance with pedigree 0.97939, pedigree (1,1,4,1,1)
  (same comment as for Aluminium III)
- Arsenic ion [water, ground-, long-term]: 1.0111e-6 kg; lognormal variance with pedigree 1.5334, pedigree (1,1,4,1,1)
  (same comment as for Aluminium III)
- Arsenic ion [water, surface water]: 4.2253e-7 kg; lognormal variance with pedigree 1.412, pedigree (1,1,4,1,1)
  (same comment as for Aluminium III)
- BOD5, Biological Oxygen Demand [water, ground-, long-term]: 0.0015155 kg; lognormal variance with pedigree 0.042808, pedigree (1,1,4,1,1)
  (same comment as for Aluminium III)
- BOD5, Biological Oxygen Demand [water, surface water]: 0.00025343 kg; lognormal variance with pedigree 0.04678, pedigree (1,1,4,1,1)
  (same comment as for Aluminium III)
- Barium II [water, ground-, long-term]: 0.00014298 kg; lognormal variance with pedigree 0.92126, pedigree (1,1,4,1,1)
  (same comment as for Aluminium III)
- Barium II [water, surface water]: 3.347e-8 kg; lognormal variance with pedigree 1.42, pedigree (1,1,4,1,1)
  (same comment as for Aluminium III)
- Beryllium II [water, ground-, long-term]: 0.00044932 kg; lognormal variance with pedigree 0.74293, pedigree (1,1,4,1,1)
  (same comment as for Aluminium III)
- Beryllium II [water, surface water]: 2.9393e-7 kg; lognormal variance with pedigree 1.4018, pedigree (1,1,4,1,1)
  (same comment as for Aluminium III)
- Boron [water, ground-, long-term]: 6.0965e-6 kg; lognormal variance with pedigree 1.2276, pedigree (1,1,4,1,1)
  (same comment as for Aluminium III)
- Boron [water, surface water]: 7.6467e-8 kg; lognormal variance with pedigree 1.2999, pedigree (1,1,4,1,1)
  (same comment as for Aluminium III)
- Bromine [water, ground-, long-term]: 6.7037e-6 kg; lognormal variance with pedigree 0.93879, pedigree (1,1,4,1,1)
  (same comment as for Aluminium III)
- Bromine [water, surface water]: 0.00011999 kg; lognormal variance with pedigree 0.28523, pedigree (1,1,4,1,1)
  (same comment as for Aluminium III)
- COD, Chemical Oxygen Demand [water, ground-, long-term]: 0.0046331 kg; lognormal variance with pedigree 0.042808, pedigree (1,1,4,1,1)
  (same comment as for Aluminium III)
- COD, Chemical Oxygen Demand [water, surface water]: 0.0002641 kg; lognormal variance with pedigree 0.046128, pedigree (1,1,4,1,1)
  (same comment as for Aluminium III)
- Cadmium II [water, ground-, long-term]: 1.382e-6 kg; lognormal variance with pedigree 5.1843, pedigree (1,1,4,1,1)
  (same comment as for Aluminium III)
- Cadmium II [water, surface water]: 1.4624e-9 kg; lognormal variance with pedigree 1.2875, pedigree (1,1,4,1,1)
  (same comment as for Aluminium III)
- Calcium II [water, ground-, long-term]: 0.016649 kg; lognormal variance with pedigree 0.289, pedigree (1,1,4,1,1)
  (same comment as for Aluminium III)
- Calcium II [water, surface water]: 0.00023646 kg; lognormal variance with pedigree 0.19719, pedigree (1,1,4,1,1)
  (same comment as for Aluminium III)
- Chloride [water, ground-, long-term]: 0.00084702 kg; lognormal variance with pedigree 0.35116, pedigree (1,1,4,1,1)
  (same comment as for Aluminium III)
- Chloride [water, surface water]: 0.005675 kg; lognormal variance with pedigree 0.13948, pedigree (1,1,4,1,1)
  (same comment as for Aluminium III)
- Chromium III [water, surface water]: 3.1912e-9 kg; lognormal variance with pedigree 0.59232, pedigree (1,1,4,1,1)
  (same comment as for Aluminium III)
- Chromium VI [water, ground-, long-term]: 2.0683e-6 kg; lognormal variance with pedigree 3.8033, pedigree (1,1,4,1,1)
  (same comment as for Aluminium III)
- Chromium VI [water, surface water]: 3.8244e-7 kg; lognormal variance with pedigree 0.99651, pedigree (1,1,4,1,1)
  (same comment as for Aluminium III)
- Cobalt II [water, ground-, long-term]: 1.2968e-6 kg; lognormal variance with pedigree 1.5089, pedigree (1,1,4,1,1)
  (same comment as for Aluminium III)
- Cobalt II [water, surface water]: 2.1629e-10 kg; lognormal variance with pedigree 2.1945, pedigree (1,1,4,1,1)
  (same comment as for Aluminium III)
- Copper ion [water, ground-, long-term]: 0.00077826 kg; lognormal variance with pedigree 0.66993, pedigree (1,1,4,1,1)
  (same comment as for Aluminium III)
- Copper ion [water, surface water]: 5.4349e-8 kg; lognormal variance with pedigree 1.0938, pedigree (1,1,4,1,1)
  (same comment as for Aluminium III)
- DOC, Dissolved Organic Carbon [water, ground-, long-term]: 0.0018333 kg; lognormal variance with pedigree 0.042808, pedigree (1,1,4,1,1)
  (same comment as for Aluminium III)
- DOC, Dissolved Organic Carbon [water, surface water]: 0.00011488 kg; lognormal variance with pedigree 0.046029, pedigree (1,1,4,1,1)
  (same comment as for Aluminium III)
- Fluoride [water, ground-, long-term]: 0.00024445 kg; lognormal variance with pedigree 0.47431, pedigree (1,1,4,1,1)
  (same comment as for Aluminium III)
- Fluoride [water, surface water]: 0.00010664 kg; lognormal variance with pedigree 0.49941, pedigree (1,1,4,1,1)
  (same comment as for Aluminium III)
- Heat, waste [water, surface water]: 2.5432 MJ; lognormal variance with pedigree 0.0645, pedigree (1,1,4,1,1)
  (same comment as for Heat, waste)
- Iodide [water, ground-, long-term]: 2.3289e-16 kg; lognormal variance with pedigree 1.8233, pedigree (1,1,4,1,1)
  (same comment as for Aluminium III)
- Iodide [water, surface water]: 1.2112e-8 kg; lognormal variance with pedigree 0.96479, pedigree (1,1,4,1,1)
  (same comment as for Aluminium III)
- Iron ion [water, ground-, long-term]: 0.0071423 kg; lognormal variance with pedigree 0.40168, pedigree (1,1,4,1,1)
  (same comment as for Aluminium III)
- Iron ion [water, surface water]: 1.8761e-7 kg; lognormal variance with pedigree 1.1342, pedigree (1,1,4,1,1)
  (same comment as for Aluminium III)
- Lead II [water, ground-, long-term]: 0.0003397 kg; lognormal variance with pedigree 1.4863, pedigree (1,1,4,1,1)
  (same comment as for Aluminium III)
- Lead II [water, surface water]: 1.9998e-8 kg; lognormal variance with pedigree 0.91755, pedigree (1,1,4,1,1)
  (same comment as for Aluminium III)
- Magnesium [water, ground-, long-term]: 0.0024357 kg; lognormal variance with pedigree 0.53605, pedigree (1,1,4,1,1)
  (same comment as for Aluminium III)
- Magnesium [water, surface water]: 1.6937e-5 kg; lognormal variance with pedigree 0.56995, pedigree (1,1,4,1,1)
  (same comment as for Aluminium III)
- Manganese II [water, ground-, long-term]: 0.00025647 kg; lognormal variance with pedigree 0.84262, pedigree (1,1,4,1,1)
  (same comment as for Aluminium III)
- Manganese II [water, surface water]: 1.6961e-8 kg; lognormal variance with pedigree 1.6334, pedigree (1,1,4,1,1)
  (same comment as for Aluminium III)
- Mercury II [water, ground-, long-term]: 1.4296e-7 kg; lognormal variance with pedigree 1.6434, pedigree (1,1,4,1,1)
  (same comment as for Aluminium III)
- Mercury II [water, surface water]: 3.6322e-9 kg; lognormal variance with pedigree 1.8029, pedigree (1,1,4,1,1)
  (same comment as for Aluminium III)
- Molybdenum VI [water, ground-, long-term]: 1.7276e-6 kg; lognormal variance with pedigree 1.4866, pedigree (1,1,4,1,1)
  (same comment as for Aluminium III)
- Molybdenum VI [water, surface water]: 2.1523e-7 kg; lognormal variance with pedigree 0.9594, pedigree (1,1,4,1,1)
  (same comment as for Aluminium III)
- Nickel II [water, ground-, long-term]: 5.175e-5 kg; lognormal variance with pedigree 1.0478, pedigree (1,1,4,1,1)
  (same comment as for Aluminium III)
- Nickel II [water, surface water]: 3.3839e-8 kg; lognormal variance with pedigree 1.7178, pedigree (1,1,4,1,1)
  (same comment as for Aluminium III)
- Nitrate [water, ground-, long-term]: 0.00011499 kg; lognormal variance with pedigree 0.52445, pedigree (1,1,4,1,1)
  (same comment as for Aluminium III)
- Nitrate [water, surface water]: 4.119e-5 kg; lognormal variance with pedigree 0.34636, pedigree (1,1,4,1,1)
  (same comment as for Aluminium III)
- Phosphate [water, ground-, long-term]: 6.7744e-5 kg; lognormal variance with pedigree 5.0777, pedigree (1,1,4,1,1)
  (same comment as for Aluminium III)
- Phosphate [water, surface water]: 1.117e-6 kg; lognormal variance with pedigree 0.33822, pedigree (1,1,4,1,1)
  (same comment as for Aluminium III)
- Potassium I [water, ground-, long-term]: 0.0015313 kg; lognormal variance with pedigree 0.35922, pedigree (1,1,4,1,1)
  (same comment as for Aluminium III)
- Potassium I [water, surface water]: 0.00057738 kg; lognormal variance with pedigree 0.20739, pedigree (1,1,4,1,1)
  (same comment as for Aluminium III)
- Selenium IV [water, ground-, long-term]: 2.5495e-7 kg; lognormal variance with pedigree 1.1793, pedigree (1,1,4,1,1)
  (same comment as for Aluminium III)
- Selenium IV [water, surface water]: 6.2363e-8 kg; lognormal variance with pedigree 1.2403, pedigree (1,1,4,1,1)
  (same comment as for Aluminium III)
- Silicon [water, ground-, long-term]: 0.0017123 kg; lognormal variance with pedigree 5.5418, pedigree (1,1,4,1,1)
  (same comment as for Aluminium III)
- Silicon [water, surface water]: 5.5824e-6 kg; lognormal variance with pedigree 0.50853, pedigree (1,1,4,1,1)
  (same comment as for Aluminium III)
- Silver I [water, ground-, long-term]: 6.5704e-7 kg; lognormal variance with pedigree 1.5946, pedigree (1,1,4,1,1)
  (same comment as for Aluminium III)
- Silver I [water, surface water]: 8.1697e-10 kg; lognormal variance with pedigree 1.5466, pedigree (1,1,4,1,1)
  (same comment as for Aluminium III)
- Sodium I [water, ground-, long-term]: 0.0035271 kg; lognormal variance with pedigree 0.36927, pedigree (1,1,4,1,1)
  (same comment as for Aluminium III)
- Sodium I [water, surface water]: 0.0011677 kg; lognormal variance with pedigree 0.17278, pedigree (1,1,4,1,1)
  (same comment as for Aluminium III)
- Sulfate [water, ground-, long-term]: 0.0036967 kg; lognormal variance with pedigree 0.45248, pedigree (1,1,4,1,1)
  (same comment as for Aluminium III)
- Sulfate [water, surface water]: 0.00061284 kg; lognormal variance with pedigree 0.32027, pedigree (1,1,4,1,1)
  (same comment as for Aluminium III)
- TOC, Total Organic Carbon [water, ground-, long-term]: 0.0018333 kg; lognormal variance with pedigree 0.042808, pedigree (1,1,4,1,1)
  (same comment as for Aluminium III)
- TOC, Total Organic Carbon [water, surface water]: 0.00011488 kg; lognormal variance with pedigree 0.046029, pedigree (1,1,4,1,1)
  (same comment as for Aluminium III)
- Thallium I [water, ground-, long-term]: 8.941e-10 kg; lognormal variance with pedigree 0.26601, pedigree (1,1,4,1,1)
  (same comment as for Aluminium III)
- Thallium I [water, surface water]: 1.4926e-12 kg; lognormal variance with pedigree 0.72642, pedigree (1,1,4,1,1)
  (same comment as for Aluminium III)
- Tin ion [water, ground-, long-term]: 7.3793e-5 kg; lognormal variance with pedigree 1.0106, pedigree (1,1,4,1,1)
  (same comment as for Aluminium III)
- Tin ion [water, surface water]: 6.9256e-8 kg; lognormal variance with pedigree 0.87596, pedigree (1,1,4,1,1)
  (same comment as for Aluminium III)
- Titanium ion [water, ground-, long-term]: 0.00078367 kg; lognormal variance with pedigree 0.82965, pedigree (1,1,4,1,1)
  (same comment as for Aluminium III)
- Titanium ion [water, surface water]: 3.3137e-7 kg; lognormal variance with pedigree 0.42004, pedigree (1,1,4,1,1)
  (same comment as for Aluminium III)
- Vanadium V [water, ground-, long-term]: 1.4798e-6 kg; lognormal variance with pedigree 2.1531, pedigree (1,1,4,1,1)
  (same comment as for Aluminium III)
- Vanadium V [water, surface water]: 6.1192e-9 kg; lognormal variance with pedigree 1.5329, pedigree (1,1,4,1,1)
  (same comment as for Aluminium III)
- Water [water, surface water]: 0.00046804 m3; lognormal variance with pedigree 1.0543, pedigree (1,1,4,1,1)
  Process water released to surface water.
  Uncertainty: uncertainty calculated from uncertainty in process water input and the uncertainty of fraction to surface water.
- Zinc II [water, ground-, long-term]: 0.00066225 kg; lognormal variance with pedigree 1.0109, pedigree (1,1,4,1,1)
  (same comment as for Aluminium III)
- Zinc II [water, surface water]: 6.0048e-8 kg; lognormal variance with pedigree 0.7755, pedigree (1,1,4,1,1)
  (same comment as for Aluminium III)
