# heat and power co-generation, natural gas, 200kW electrical, lean burn

Dataset: EcoSpold 2, unit process
Geography: CH
Time period: 2000-01-01 to 2022-12-31
Technology level: modern
Classification: EcoSpold01Categories: natural gas/cogeneration
Classification: ISIC rev.4 ecoinvent: 3530:Steam and air conditioning supply
Tags: ConvertedDataset; with true value; natural gas power
Scenario: Business-as-Usual
System model: Substitution, consequential, long-term
Generated by: [System]
Published in: Heck, T. 2007
Database: ecoinvent
isCopyrightProtected: true

## General comment
The multioutput-process 'natural gas, burned in cogen 200kWe lean burn, allocation exergy' delivers the coproducts 'heat, at cogen 200kWe lean burn, allocation exergy' and 'electricity, at cogen 200kWe lean burn, allocation exergy'. The exergy allocation is the allocation scheme suggested to be used within ecoinvent (e.g. in electricity mixes).
[This dataset was already contained in the ecoinvent database version 2. It was not individually updated during the transfer to ecoinvent version 3. Life Cycle Impact Assessment results may still have changed, as they are affected by changes in the supply chain, i.e. in other datasets. This dataset was generated following the ecoinvent quality guidelines for version 2. It may have been subject to central changes described in the ecoinvent version 3 change report (http://www.ecoinvent.org/database/ecoinvent-version-3/reports-of-changes/), and the results of the central updates were reviewed extensively. The changes added e.g. consistent water flows and other information throughout the database. The documentation of this dataset can be found in the ecoinvent reports of version 2, which are still available via the ecoinvent website. The change report linked above covers all central changes that were made during the conversion process.]

## Included activities end
The module includes fuel input, infrastructure, emissions to air, and substances needed for operation.

## Geography
Emissions and efficiencies adjusted to Swiss emission regulation (LRV, Luftreinhalteverordnung) valid in year 2000.

## Technology
Average technology available on market.

## Time period
The Annual Production Volume is valid for the year 2011.

## Parameters
- scaling factor: 1.92308 dimensionless; name scaling_factor
  Dataset scaled to the output of 1MJ of heat.

## Reference product
- heat, district or industrial, natural gas: 1 MJ; name heat; = 0.52 * scaling_factor; By-product classification allocatable product; CPC 17300: Steam and hot water
  Amount was scaled to 1.
  EcoSpold01Location=CH
  production volume 7.05714e8 MJ
    Rough estimation. Calculated from the electricity produced with natural gas in Switzerland 2008.
  property Corresponding fuel use 1.75207 MJ; name fuel_use; = 0.025641*35.532/0.52
    Lower heating value of the fuel input related to the heat/electricity output
  property exergy 0.169678 MJ; name heat_exergy
    allocation factor for electricity (=1) vs. heat, where heat is calculated as the termodynamic mean temperature Tm = (Tfeed-Treturn)/ln(Tfeed/Treturn), relative to the application temperature (Tu, typically = 293 K), i.e. (Tm-Tu)/Tm
  property price 0.0106 EUR2005
    Average European district heat price from Ecoheatcool and Euroheat 2005-2006, Ecoheat Work package 1: The European heat market. Final report. 10.6 EUR/GJ i s the price of district heat. http://www.solarthermalworld.org/files/Ecoheatcool%20WP1%20Web.pdf?download
  property true value relation 0.169678; name heat_true_value_relation
    property to calculate "true value" from
  properties: carbon allocation 0 kg, carbon content 0, heating value, net 1 MJ

## Inputs from technosphere
- electricity, high voltage: -0.176346 kWh; name electricity; = 0.0917 * scaling_factor
  EcoSpold01Location=CH
  Amount was scaled to the amount of reference product.
  production volume
    Literature value/calculated value. Valid for 2011.
    Based on Stolz&Frischknecht 2015, Tables 3.7, 3.6 and the SBB railway electricity mix from Itten et al. 2012 Table 3.182.
    A loss of 5% from gross to net is assumed for natural gas power.
    Stolz, P., Frischnkecht, R. 2015. Umweltbilanz Strommix Schweiz 2011. Issued by treeze Ltd. for the Federal Office for the Environment, Switzerland.
    Itten, R., Frischknecht, R., Stucki, M. 2012. Life Cycle Inventories of Electricity Mixes and Grid. ESU-services Ltd., fair conulting in sustainability, Uster. "
  property exergy 3.6 MJ; name electricity_exergy
  property true value relation 3.6; name electricity_true_value_relation
  properties: price 0.0977 EUR2005
  note on exergy: allocation factor for electricity (=1) vs. heat, where heat is calculated as the termodynamic mean temperature Tm = (Tfeed-Treturn)/ln(Tfeed/Treturn), relative to the application temperature (Tu, typically = 293 K), i.e. (Tm-Tu)/Tm
- heat and power co-generation unit, 200kW electrical, common components for heat+electricity: 8.80769e-9 unit; = 4.58E-09 * scaling_factor; lognormal variance with pedigree 0.04, pedigree (1,1,5,1,1)
  EcoSpold01Location=RER
  Amount was scaled to the amount of reference product.
- heat and power co-generation unit, 200kW electrical, components for electricity only: 8.80769e-9 unit; = 4.58E-09 * scaling_factor; lognormal variance with pedigree 0.04, pedigree (1,1,5,1,1)
  Amount was scaled to the amount of reference product.
  EcoSpold01Location=RER
- heat and power co-generation unit, 200kW electrical, components for heat only: 8.80769e-9 unit; = 4.58E-09 * scaling_factor; lognormal variance with pedigree 0.04, pedigree (1,1,5,1,1)
  EcoSpold01Location=RER
  Amount was scaled to the amount of reference product.
- lubricating oil: 5.76923e-5 kg; = 3E-05 * scaling_factor; lognormal variance with pedigree 0.05, pedigree (1,1,5,1,1)
  vender information
  Amount was scaled to the amount of reference product.
  EcoSpold01Location=RER
  properties: carbon content, fossil 0.75, dry mass 1 kg, heating value, net 40.2 MJ, wet mass 1 kg
  note on carbon content, fossil: Lubricating oil is produced from diesel. C-content/dry mass of fats and oils considered 75%, from: ecoinvent v2.2 report, n 15a, pg 40
  note on heating value, net: Literature value, Source: IPCC 2006, 2006 IPCC Guidelines for National Greenhouse Gas Inventories, Prepared by the National Greenhouse Gas Inventories Programme, Eggleston H.S., Buendia L., Miwa K., Ngara T. and Tanabe K. (eds). Published: IGES, Japan
- natural gas, low pressure: 0.0493097 m3; = 0.0256410256410256 * scaling_factor; lognormal variance with pedigree 0.04, pedigree (1,1,5,1,1)
  Amount was scaled to the amount of reference product.
  EcoSpold01Location=CH
  properties: carbon content, fossil 0.695187, dry mass 1 kg, heating value, gross 39 MJ, heating value, net 36 MJ, wet mass 1 kg
  note on carbon content, fossil: C content considered the same as in high pressure (consumption mix)
  note on heating value, net: Literature value, Source: Christoph Meili;Niels Jungbluth;Maresa Bussa (2021) Life cycle inventories of crude oil and natural gas extraction. ESU-services Ltd. commissioned by BAFU & VSG, Schaffhausen, Switzerland, http://esu-services.ch/data/public-lci-reports/
- waste mineral oil: -5.76923e-5 kg; name waste_min_oil; = 3E-05 * scaling_factor; lognormal variance with pedigree 0.12, pedigree (1,1,1,1,1)
  EcoSpold01Location=CH
  rough estimate
  Amount was scaled to the amount of reference product.
  production volume
    Calculated from the production volume of heat, district or industrial, natural gas in proportion to the respective output amounts.
  properties: carbon content, fossil 0.864444, dry mass 0.9 kg, heating value, net 34.7 MJ, water content 0.111111, wet mass 1 kg
  note on carbon content, fossil: Tab A.6, ecoinvent v2.2 report 13_I. C content has been calculated after data in the tables, and then referred to 1 kg DM
  note on heating value, net: Value taken from the general comment of the treatment dataset.

## Emissions to nature
- Carbon dioxide, fossil [air, urban air close to ground]: 0.107692 kg; = 0.056 * scaling_factor; lognormal variance with pedigree 0.04, pedigree (1,1,5,1,1)
  composition of natural gas
  Amount was scaled to the amount of reference product.
- Carbon monoxide, fossil [air, urban air close to ground]: 0.000307692 kg; = 0.00016 * scaling_factor; lognormal variance with pedigree 0.07, pedigree (1,1,5,1,1)
  estimate based on different references
  Amount was scaled to the amount of reference product.
- Dinitrogen monoxide [air, urban air close to ground]: 9.61538e-6 kg; = 5E-06 * scaling_factor; lognormal variance with pedigree 0.34, pedigree (1,1,5,1,1)
  rough estimate
  Amount was scaled to the amount of reference product.
- Methane, fossil [air, urban air close to ground]: 0.000153846 kg; = 8E-05 * scaling_factor; lognormal variance with pedigree 0.52, pedigree (1,1,5,1,1)
  (same comment as for Carbon monoxide, fossil)
- NMVOC, non-methane volatile organic compounds [air, urban air close to ground]: 1.92308e-5 kg; = 1E-05 * scaling_factor; lognormal variance with pedigree 1.12, pedigree (1,1,5,1,1)
  (same comment as for Carbon monoxide, fossil)
- Nitrogen oxides [air, urban air close to ground]: 0.000134615 kg; = 7E-05 * scaling_factor; lognormal variance with pedigree 0.06, pedigree (1,1,5,1,1)
  (same comment as for Carbon monoxide, fossil)
- Particulate Matter, < 2.5 um [air, urban air close to ground]: 2.88462e-7 kg; = 1.5E-07 * scaling_factor; lognormal variance with pedigree 0.16, pedigree (1,1,5,1,1)
  (same comment as for Carbon monoxide, fossil)
- Sulfur dioxide [air, urban air close to ground]: 1.05769e-6 kg; = 5.5E-07 * scaling_factor; lognormal variance with pedigree 0.04, pedigree (1,1,5,1,1)
  composition of natural gas
  Amount was scaled to the amount of reference product.

## Sampling procedure
Literature. Manufacturer information.

## Extrapolations
Annual Production volume for the year 2009. Uncertainty has been adjusted accordingly.

## Review by Gerald Rebitzer (obsolete) 2003-07-03
passed

## Review by Emilia Moreno Ruiz 2012-04-16
calculation of fuel use property.
