# treatment of scrap aluminium, municipal incineration

Dataset: EcoSpold 2, unit process
Geography: RoW
Time period: 2006-01-01 to 2022-12-31
Technology level: current
Classification: ISIC rev.4 ecoinvent: 3821:Treatment and disposal of non-hazardous waste
Synonyms: municipal waste incineration; Siedlungsabfallverbrennung; Kehrichtverbrennung
Scenario: Business-as-Usual
System model: Substitution, consequential, long-term
Share of production covered: 1.8 %
Generated by: Gabor Doka
Published in: Doka G. 2013
Database: ecoinvent
isCopyrightProtected: true

## General comment
This dataset represents the activity of waste disposal of scrap aluminium in a municipal solid waste incinerator (MSWI) // Recommended use of this dataset: For disposal of bulky, non-dust aluminium, which goes to disposal as part of a larger item or in small amounts only. Pure, isolated aluminium fractions will not be disposed in incinerators or landfills, but rather go to recycling. // // Waste composition (wet, in ppm): H2O n.a.; O n.a.; H n.a.; C n.a.; S n.a.; N n.a.; P n.a.; B n.a.; Cl 4825; Br n.a.; F n.a.; I n.a.; Ag n.a.; As n.a.; Ba n.a.; Cd 3; Co n.a.; Cr n.a.; Cu 8.5; Hg n.a.; Mn n.a.; Mo n.a.; Ni n.a.; Pb 25.5; Sb n.a.; Se n.a.; Sn n.a.; V n.a.; Zn 29; Be n.a.; Sc n.a.; Sr n.a.; Ti n.a.; Tl n.a.; W n.a.; Si n.a.; Fe n.a.; Ca n.a.; Al 995110; K n.a.; Mg n.a.; Na n.a.; // Share of carbon in waste that is biogenic 60.4%. // Share of metals in waste not oxidised and bulk-recyclable (exclude very small or thin parts) Iron: 0%; Alu: 100%; Copper: 0%. // One kg of this waste produces 0.8342 kg of slag and 0 kg of residues, which are landfilled. // Net energy production: 0MJ/kg electric energy and 0MJ/kg thermal energy. // Recovery of metal scrap to recycling: 0g iron scrap, 308.48g aluminium scrap, 0g copper scrap.

## Included activities start
waste incineration from waste reception gate and delivery into waste bunker at incinerator plant site (without transports to the incinerator)

## Included activities end
Waste-specific short-term emissions to water from leachate. Long-term emissions from landfill to ground water.

## Geography
Specific to the technology mix encountered in Switzerland in 2010. Well applicable to modern incineration practices in Europe, North America or Japan.

## Technology
average Swiss MSWI plants in 2010 (grate incinerators) with electrostatic precipitator for fly ash (ESP), wet flue gas scrubber and 25% SNCR , 42.77% SCR-high dust , 32.68% SCR-low dust -DeNOx facilities and 0% without Denox (weighted according to mass of burnt waste, representing Swiss average). Efficiency of iron scrap separation from slag : 58%. Efficiency of non-ferrous scrap separation from slag : 31%. Gross electric efficiency technology mix 15.84% and Gross thermal efficiency technology mix 28.51%

## Time period
Waste composition as given in literature reference, theoretical data or other source. Transfer coefficients for modern MSWI.

## Reference product
- scrap aluminium: -1 kg; By-product classification Waste; CPC 39363: Waste and scrap of aluminium; CAS 7429-90-5
  Main reference product of this activity (supply of disposal service).
  production volume 5.424e8 kg
    based on estimate on MSW in WTE globally and share of aluminium metal in bottom ash from Swiss MSW (BAFU 2010)
  property price 0 EUR2005
    Waste products are assigned a price of zero as they are assumed to require further treatment.
  properties: carbon allocation 0 kg, carbon content 0, carbon content, fossil 0, carbon content, non-fossil 0, dry mass 1 kg, water content 0, water in wet mass 0 kg, wet mass 1 kg

## Inputs from technosphere
- aluminium scrap, post-consumer, prepared for melting: -0.30848 kg; lognormal variance with pedigree 0.0090848, pedigree (1,1,1,1,1)
  Aluminium scrap recovered from this waste.
  Uncertainty: uncertainty calculated from uncertainty in waste composition, uncertainty of share of recyclable metal, uncertainty of transfer coefficient to bottom ash, uncertainty of the efficiency of scrap removal in MSWI plant.
  production volume
    calculated in proportion to reference product waste input to incinerator
  properties: dry mass 1 kg, price 0.806 EUR2005, wet mass 1 kg
- ammonia, anhydrous, liquid: 1.99639e-8, 4.06183e-9, 3.8754e-8, 1.4928e-7, 1.81579e-8, 1.20243e-8, 4.29563e-7, 3.95555e-8 kg (8 suppliers, which the file names only by identifier); sum of these 7.1136e-7 kg; lognormal variance with pedigree 0.12926, pedigree (1,1,4,1,1)
  Input to DeNOx stage (100% NH3).
  Uncertainty: uncertainty calculated from uncertainty in average DeNOx input, uncertainty in the share of thermal NOx, uncertainty of nitrogen content in average municipal waste and the uncertainty in nitrogen content in *this* waste.
  properties: dry mass 1 kg, wet mass 1 kg
- chromium oxide, flakes: 9.0956e-10 kg; lognormal variance with pedigree 0.45542, pedigree (1,1,4,1,1)
  Input to DeNOx stage.
  Uncertainty: uncertainty calculated from uncertainty in average DeNOx input, uncertainty in the share of thermal NOx, uncertainty of nitrogen content in average municipal waste and the uncertainty in nitrogen content in *this* waste.
  properties: dry mass 1 kg, wet mass 1 kg
- electricity, for reuse in municipal waste incineration only: 0.0142688, 0.0142688, 0.0142688, 0.0142688, 0.0142688 kWh (5 suppliers, which the file names only by identifier); sum of these 0.071344 kWh; lognormal variance with pedigree 0.00859512, pedigree (1,1,4,1,1)
  Net electricity required to incinerate this waste (subsidiesed from high-calorific waste fractions).
  Uncertainty: uncertainty is calculated from uncertainties in waste composition and uncertainties in energy efficiency and the uncertainty in internal energy demand
- heat, district or industrial, natural gas: 1.75249e-5, 0.000115495 MJ (2 suppliers, which the file names only by identifier); sum of these 0.00013302 MJ; lognormal variance with pedigree 0.12926, pedigree (1,1,4,1,1)
  Input to DeNOx stage, to heat up flue gas in low-dust SCR.
  Uncertainty: uncertainty calculated from uncertainty in average DeNOx input, uncertainty in the share of thermal NOx, uncertainty of nitrogen content in average municipal waste and the uncertainty in nitrogen content in *this* waste.
  properties: heating value, net 1 MJ
- heat, for reuse in municipal waste incineration only: 0.000197536, 0.000197536, 0.000197536, 0.000197536, 0.000197536 MJ (5 suppliers, which the file names only by identifier); sum of these 0.00098768 MJ; lognormal variance with pedigree 0.00859512, pedigree (1,1,4,1,1)
  Net heat required to incinerate this waste (subsidiesed from high-calorific waste fractions).
  Uncertainty: uncertainty is calculated from uncertainties in waste composition and uncertainties in energy efficiency and the uncertainty in internal energy demand
- municipal waste incineration facility: 2.5e-10 unit
  Demands per kilogram waste.
- process-specific burdens, slag landfill: 0.83421 kg; lognormal variance with pedigree 0.0117442, pedigree (1,1,4,1,1)
  Mass-specific expenditures required for landfilling of bottom ash.
  Uncertainty: uncertainty is calculated from uncertainties in waste composition and transfer coefficients in incinerator
- slag landfill: 1.483e-9 unit; lognormal variance with pedigree 0.0117442, pedigree (1,1,4,1,1)
  Landfill infrastructure required for landfilling of bottom ash.
  Uncertainty: uncertainty is calculated from uncertainties in waste composition and transfer coefficients in incinerator
- titanium dioxide: 4.4568e-8 kg; lognormal variance with pedigree 0.45542, pedigree (1,1,4,1,1)
  Input to DeNOx stage (TiO2 catalyst carrier)
  Uncertainty: uncertainty calculated from uncertainty in average DeNOx input, uncertainty in the share of thermal NOx, uncertainty of nitrogen content in average municipal waste and the uncertainty in nitrogen content in *this* waste.
  properties: dry mass 1 kg, wet mass 1 kg
- transport, freight, lorry, unspecified: 0.000597861, 0.00381866, 0.0289515 metric ton*km (3 suppliers, which the file names only by identifier); sum of these 0.033368 metric ton*km; lognormal variance with pedigree 0.0117442, pedigree (1,1,4,1,1)
  Transport services to transport incineration residues to landfills.
  Uncertainty: uncertainty calculated from uncertainty of the waste composition of this waste, uncertainty of transfer coefficients and the uncertainty in generic transportation distances

## Inputs from nature
- Oxygen [natural resource, in air]: 0.0021892 kg
  Oxygen from ambient air needed to combust and oxidise this waste. Net demand, i.e. without O2 leaving the plant in flue gas uncombusted.

## Emissions to nature
- Ammonia [air, urban air close to ground]: 8.3638e-10 kg; lognormal variance with pedigree 0.17159, pedigree (1,1,4,1,1)
  Nitrogen species emitted to air after DeNOx stage.
  Uncertainty: uncertainty calculated from uncertainty in average N-emissions and uncertainty in the share of thermal NOx and the uncertainty in nitrogen content in *this* waste.
- Benzene [air, urban air close to ground]: 4.9958e-8 kg; lognormal variance with pedigree 0.0491, pedigree (1,1,4,1,1)
  Incomplete combustion product emitted to air.
  Uncertainty: uncertainty calculated from uncertainty in average operation emissions, and the uncertainty of the flue gas volume from this waste.
- Benzene, hexachloro- [air, urban air close to ground]: 1.0446e-10 kg; lognormal variance with pedigree 0.0491, pedigree (1,1,4,1,1)
  (same comment as for Benzene)
- Benzene, pentachloro- [air, urban air close to ground]: 2.6394e-10 kg; lognormal variance with pedigree 0.0491, pedigree (1,1,4,1,1)
  (same comment as for Benzene)
- Benzo(a)pyrene [air, urban air close to ground]: 1.1117e-12 kg; lognormal variance with pedigree 0.30974, pedigree (1,1,4,1,1)
  (same comment as for Benzene)
- Carbon monoxide, fossil [air, urban air close to ground]: 3.3621e-5 kg; lognormal variance with pedigree 0.65557, pedigree (1,1,4,1,1)
  (same comment as for Benzene)
- Carbon monoxide, non-fossil [air, urban air close to ground]: 5.1302e-5 kg; lognormal variance with pedigree 0.65557, pedigree (1,1,4,1,1)
  (same comment as for Benzene)
- Dioxins, measured as 2,3,7,8-tetrachlorodibenzo-p-dioxin [air, urban air close to ground]: 9.9909e-14 kg; lognormal variance with pedigree 0.30974, pedigree (1,1,4,1,1)
  (same comment as for Benzene)
- Heat, waste [air, urban air close to ground]: 0.20904 MJ; lognormal variance with pedigree 0.00898726, pedigree (1,1,4,1,1)
  Waste heat generated from heating value of this waste plus any electricity required to process it.
  Uncertainty: uncertainty is calculated from uncertainties in waste composition and uncertainties in energy efficiency and the uncertainty in internal energy demand
- Methane, fossil [air, urban air close to ground]: 2.9668e-7 kg; lognormal variance with pedigree 0.0491, pedigree (1,1,4,1,1)
  (same comment as for Benzene)
- Methane, non-fossil [air, urban air close to ground]: 4.5269e-7 kg; lognormal variance with pedigree 0.0491, pedigree (1,1,4,1,1)
  (same comment as for Benzene)
- NMVOC, non-methane volatile organic compounds [air, urban air close to ground]: 2.2736e-6 kg; lognormal variance with pedigree 0.0491, pedigree (1,1,4,1,1)
  (same comment as for Benzene)
- Nitrogen oxides [air, urban air close to ground]: 2.6485e-7 kg; lognormal variance with pedigree 0.17159, pedigree (1,1,4,1,1)
  Sum of fuel-Nox and thermal-NOx emitted to air after DeNOx stage.
  Uncertainty: uncertainty calculated from uncertainty in average N-emissions and uncertainty in the share of thermal NOx and the uncertainty in nitrogen content in *this* waste.
- Particulate Matter, < 2.5 um [air, urban air close to ground]: 5.9646e-6 kg; lognormal variance with pedigree 0.30974, pedigree (1,1,4,1,1)
  (same comment as for Benzene)
- Particulate Matter, > 2.5 um and < 10um [air, urban air close to ground]: 2.9973e-8 kg; lognormal variance with pedigree 0.12811, pedigree (1,1,4,1,1)
  (same comment as for Benzene)
- Phenol, pentachloro- [air, urban air close to ground]: 2.1756e-11 kg; lognormal variance with pedigree 0.0491, pedigree (1,1,4,1,1)
  (same comment as for Benzene)
- Toluene [air, urban air close to ground]: 9.9916e-8 kg; lognormal variance with pedigree 0.0491, pedigree (1,1,4,1,1)
  (same comment as for Benzene)
- Water [air, urban air close to ground]: 0.0008211 m3; lognormal variance with pedigree 0.12113, pedigree (1,1,4,1,1)
  Water vapour from waste humidity, hydrogen oxidation and part of the process water.
  Uncertainty: Uncertainty calculated from uncertainty in waste composition, process water input and the uncertainty of fraction to air.
- Aluminium III [water, ground-, long-term]: 0.56088 kg; lognormal variance with pedigree 0.018231, pedigree (1,1,4,1,1)
  Long-term emissions from landfilling of incineration residues.
  Uncertainty: uncertainty is calculated from uncertainties in waste composition and transfer coefficients in incinerator and landfills.
- Aluminium III [water, surface water]: 9.0216e-6 kg; lognormal variance with pedigree 1.2319, pedigree (1,1,4,1,1)
  Emissions to water from waste composition and transfer coefficients in incinerator and landfills.
  Uncertainty: uncertainty is calculated from uncertainties in waste composition and transfer coefficients in incinerator and landfills
- Cadmium II [water, ground-, long-term]: 2.9985e-6 kg; lognormal variance with pedigree 1.4343, pedigree (1,1,4,1,1)
  (same comment as for Aluminium III)
- Cadmium II [water, surface water]: 1.5435e-9 kg; lognormal variance with pedigree 2.1738, pedigree (1,1,4,1,1)
  (same comment as for Aluminium III)
- Chloride [water, ground-, long-term]: 0.00065723 kg; lognormal variance with pedigree 0.48386, pedigree (1,1,4,1,1)
  (same comment as for Aluminium III)
- Chloride [water, surface water]: 0.0041678 kg; lognormal variance with pedigree 0.46511, pedigree (1,1,4,1,1)
  (same comment as for Aluminium III)
- Copper ion [water, ground-, long-term]: 8.4997e-6 kg; lognormal variance with pedigree 1.2974, pedigree (1,1,4,1,1)
  (same comment as for Aluminium III)
- Copper ion [water, surface water]: 2.9511e-10 kg; lognormal variance with pedigree 2.393, pedigree (1,1,4,1,1)
  (same comment as for Aluminium III)
- Heat, waste [water, surface water]: 0.047796 MJ; lognormal variance with pedigree 0.00898726, pedigree (1,1,4,1,1)
  (same comment as for Heat, waste)
- Lead II [water, ground-, long-term]: 2.55e-5 kg; lognormal variance with pedigree 1.1518, pedigree (1,1,4,1,1)
  (same comment as for Aluminium III)
- Lead II [water, surface water]: 4.6547e-10 kg; lognormal variance with pedigree 2.3324, pedigree (1,1,4,1,1)
  (same comment as for Aluminium III)
- Water [water, surface water]: 0.0004284 m3; lognormal variance with pedigree 0.10997, pedigree (1,1,4,1,1)
  Process water released to surface water.
  Uncertainty: uncertainty calculated from uncertainty in process water input and the uncertainty of fraction to surface water.
- Zinc II [water, ground-, long-term]: 2.8999e-5 kg; lognormal variance with pedigree 1.1348, pedigree (1,1,4,1,1)
  (same comment as for Aluminium III)
- Zinc II [water, surface water]: 8.6326e-10 kg; lognormal variance with pedigree 2.2507, pedigree (1,1,4,1,1)
  (same comment as for Aluminium III)
