# electricity production, coal, aluminium industry

Dataset: EcoSpold 2, unit process
Geography: IAI Area, EU27 & EFTA
Time period: 2015-01-01 to 2022-12-31
Technology level: current
Classification: ISIC rev.4 ecoinvent: 3510:Electric power generation, transmission and distribution
Classification: EcoSpold01Categories: hard coal/power plants
Tags: re-labelling activity; electricity, primary aluminium industry
Scenario: Business-as-Usual
System model: Substitution, consequential, long-term
Generated by: Djibril RENE
Database: ecoinvent
isCopyrightProtected: true

## General comment
This is a dataset used to create an aluminium industry specific electricity market for aluminium-producing countries within EU27 and EFTA (see Geography comment field for list of countries). The production volume represents the total amount of electricity from coal used for aluminium production (electrolysis and ingot casting) in the region. The dataset also identifies the technology and country providing the electricity from coal power plants.
Electricity markets specific to the aluminium-industry are needed in an LCI database because primary aluminium production is very energy intensive, and hence the location of production plants is often determined by access to large amounts of cheap electricity, which often results in an electricity mix that is different from the general grid mix of the countries where the production plants are located.
It is assumed that the production of electricity in general and in aluminium industry specific power plants is identical. Details on actual electricity generation with each technology can be found in the corresponding datasets.
The share of electricity produced using lignite and hard coal is calculated using both (1) estimates of the share of coal electricity coming from each country within EU27+EFTA; and (2) ecoinvent v3.2 country-specific split of coal power plants between hard coal and lignite. The share of coal electricity in each country was calculated by distributing the total coal electricity used in aluminium production in the EU27+EFTA region (using regional data supplied by the International Aluminium Institute [IAI] and the European Aluminium Association [EAA]). The distribution is weighted by country-specific aluminium production volumes (source: EAA personal communication) and general grid mix in the respective countries (source: International Energy Agency). Exceptions to the general procedure are Greece, Slovakia and Slovania, for which the IAI provided country-specific aluminium-specific grid mixes.
Calculations are detailed in the report 'Calculating grid mixes for the aluminium industry in ecoinvent v3', available on the ecoinvent website.

## Included activities start
Re-labelling dataset, not representing a real transformation activity. Conceptually, the activity can be said to start with the production of electricity.

## Included activities end
Re-labelling dataset, not representing a real transformation activity. Conceptually, the activity can be said to end with a given amount of high voltage electricity labelled as specifically used for the production of electricity.

## Geography
Aluminium producing European countries within EU27 and EFTA whose aluminium producers are part of the European Aluminium Association (France, Germany, Greece, Iceland, Italy, Netherlands, Norway, Spain, Sweden, United Kingdom, Romania, Slovakia and Slovenia)

## Time period
Production volume updated with 2015 data from IAI

## Reference product
- electricity, high voltage, aluminium industry: 1 kWh; = hard_DE+ hard_ES+ hard_FR+ hard_GB+ hard_IT+ hard_NL+ hard_NO+ hard_SE+ hard_SI+ lig_RO+lig_GR+ lig_SI +lig_DE+hard_SK+lig_ES+lig_IT+lig_SK; By-product classification allocatable product; CPC 17100: Electrical energy
  Expressed as sum of contributing technologies (inputs) to allow uncertainty analysis: each technology share is uncertain, and in a Monte Carlo analysis will always be normalized by the sum contribution of each technology
  production volume 5.73e9 kWh
    The production volume, which is ultimately used to determine the share of coal-based electricity in the downstream market for aluminium industry specific high voltage electricity, is calculated by multiplying the following data:
    (1) electricity mix used to produce aluminium in the EU27+EFTA region, provided by the European Aluminium Association (EAA) and validated by the International Aluminium Institute.
    (2) primary aluminium production volumes of each aluminium producing country in the EU27+EFTA region, provided by EAA.
    (3) electricity requirements, per tonne primary aluminium, for both Söderberg (global average) and prebake (region-specific data) electrolysis technologies, as well as the EU27+EFTA specific proportion of aluminium produced by each technology.
    (4) electricity compensating line and transformation losses from production to consumption as medium voltage electricity. Losses estimated using country-level ecoinvent v3.2 data for all countries.
    (5) electricity consumed in ingot casting.
  property price 0.0977 EUR2005
    Calculated in temporary price data. 94% of the average price (to account for a 6% loss in transformation and transmission) for electricity for industrial consumersin 2005 (excluded taxes). From IEA.
  properties: carbon allocation 0 kg, carbon content 0

## Inputs from technosphere
- electricity, high voltage: 0.151982 kWh; name lig_GR; lognormal variance with pedigree 0.0053, pedigree (3,2,3,1,2)
  Calculated amount (see general comments).
- electricity, high voltage: 0.137092 kWh; name lig_RO; lognormal variance with pedigree 0.0053, pedigree (3,2,3,1,2)
  Calculated amount (see general comments).
- electricity, high voltage: 0.0459933 kWh; name lig_SI; lognormal variance with pedigree 0.0053, pedigree (3,2,3,1,2)
  Calculated amount (see general comments).
- electricity, high voltage: 0.001718, 0.000301869, 0.00552337, 0.00183808, 0.00100595, 0.00260624, 0.00131919, 0.00944533, 0.00101565, 0.00487213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 kWh (13 suppliers, which the file names only by identifier); sum of these 0.0347825 kWh
  Calculated amount (see general comments).
- electricity, high voltage: 0.0440903 kWh; name hard_GB; lognormal variance with pedigree 0.0053, pedigree (3,2,3,1,2)
  Calculated amount (see general comments).
- electricity, high voltage: 0.133048 kWh; name hard_ES; lognormal variance with pedigree 0.0053, pedigree (3,2,3,1,2)
  Calculated amount (see general comments).
- electricity, high voltage: 0.000613326 kWh; name lig_IT; lognormal variance with pedigree 0.0053, pedigree (3,2,3,1,2)
  Calculated amount (see general comments).
- electricity, high voltage: 0.203345 kWh; name lig_DE; lognormal variance with pedigree 0.0053, pedigree (3,2,3,1,2)
  Calculated amount (see general comments).
- electricity, high voltage: 0.0322918 kWh; name hard_IT; lognormal variance with pedigree 0.0053, pedigree (3,2,3,1,2)
  Calculated amount (see general comments).
- electricity, high voltage: 0.00832344 kWh; name lig_ES; lognormal variance with pedigree 0.0053, pedigree (3,2,3,1,2)
  Calculated amount (see general comments).
- electricity, high voltage: 0.14724 kWh; name hard_DE; lognormal variance with pedigree 0.0053, pedigree (3,2,3,1,2)
  Calculated amount (see general comments).
- electricity, high voltage: 0.019486 kWh; name hard_FR; lognormal variance with pedigree 0.0053, pedigree (3,2,3,1,2)
  Calculated amount (see general comments).
- electricity, high voltage: 0.0417118 kWh; name hard_NL; lognormal variance with pedigree 0.0053, pedigree (3,2,3,1,2)
  Calculated amount (see general comments).

## Sampling procedure
International Aluminium Institute (IAI) data used for total electricity used in the production of aluminium that is from coal power plants. ecoinvent data used to split coal-based electricity production to the respective fuels (lignite, hard coal). The cited 97% representativeness is for IAI data (data based on 97% of regional aluminium production). The percent representativeness of data used to split coal based electricity production to different types of fuels (national grid proxy) is 100%.

## Extrapolations
For the split of coal-based electricity production to the respective fuels (lignite, hard coal), shares of different types of coal power plants in the countries, when available, were used as a proxy for the split relevant for the aluminium industry, else 'Rest-of-world' split (33% lignite, 67% hard coal) was used, see general comments.
