# treatment of waste cooking oil, purified, esterification

Dataset: EcoSpold 2, unit process
Geography: FR
Time period: 1996-01-01 to 2022-12-31
Technology level: current
Classification: ISIC rev.4 ecoinvent: 3830:Materials recovery
Classification: EcoSpold01Categories: biomass/fuels
Tags: ConvertedDataset
Scenario: Business-as-Usual
System model: Substitution, consequential, long-term
Share of production covered: 0 %
Generated by: Edgard Gnansounou
Published in: Jungbluth N. 2007
Database: ecoinvent
isCopyrightProtected: true

## General comment
Inventory refers to the production of 1 kg vegetable oil methyl ester (VOME), respectively glycerine, from purified waste cooking oil. The multioutput-process 'vegetable oil, from waste cooking oil, in esterification plant' delivers the co-products 'vegetable oil methyl ester, at esterification plant' and 'glycerine, from vegetable oil, at esterification plant'. Economic allocation with allocation factor of 87.1% to rape oil and 12.9% to glycerine. Allocation of CO2 emissions is done according to carbon balance.
[This dataset was already contained in the ecoinvent database version 2. It was not individually updated during the transfer to ecoinvent version 3. Life Cycle Impact Assessment results may still have changed, as they are affected by changes in the supply chain, i.e. in other datasets. This dataset was generated following the ecoinvent quality guidelines for version 2. It may have been subject to central changes described in the ecoinvent version 3 change report (http://www.ecoinvent.org/database/ecoinvent-version-3/reports-of-changes/), and the results of the central updates were reviewed extensively. The changes added e.g. consistent water flows and other information throughout the database. The documentation of this dataset can be found in the ecoinvent reports of version 2, which are still available via the ecoinvent website. The change report linked above covers all central changes that were made during the conversion process.]

## Included activities end
This process includes the esterification process of vegetable oil (from waste cooking oil) to methyl ester and glycerine, intermediate storage of the oil and products, treatment of specific wastewater effluents. System boundary is at the esterification plant.

## Geography
Data from different plants worldwide (incl. literature data)

## Technology
Typical vegetable oil esterification plant designed for vegetable oil methyl ester (VOME) production (for use in the vehicle fuels market), in the French context. Vegetable oil base-catalyzed transesterification.

## Time period
Data from 1996 to 2003, current technology for large scale biodiesel plants worldwide

## Parameters
- fraction, cooling water, cooling pond system, to air: 0.032 dimensionless; name fraction_CW_CP_to_air; lognormal variance with pedigree 0.0413, pedigree (2,3,1,3,1)
  Calculated based on literature value (Scown, C.D., 2011, Water Footprint of U.S. Transportation Fuels and supplying information of the article) (Vionnet, S., Quantis Water Database - Technical Report, 2012).
- fraction, cooling water, once-through system, to air: 0.004 dimensionless; name fraction_CW_OT_to_air; lognormal variance with pedigree 0.0413, pedigree (2,3,1,3,1)
  (same comment as for fraction, cooling water, cooling pond system, to air)
- fraction, cooling water, recirculating system, to air: 0.771 dimensionless; name fraction_CW_R_to_air; lognormal variance with pedigree 0.0413, pedigree (2,3,1,3,1)
  (same comment as for fraction, cooling water, cooling pond system, to air)
- fraction, cooling water, to air: 0.3875 dimensionless; name fraction_CW_to_air; = (0.5*fraction_CW_OT_to_air)+(0.5*fraction_CW_R_to_air); lognormal variance with pedigree 0.092025, pedigree (4,4,3,2,4)
  Calculated value based on literature value (see comments of the other parametres present in this dataset) and expert opinion. In the case when no industry/literature data are available about the type of cooling or directly fraction, cooling water, to air specific for the process a default assumption is applied. It is assumed that the once-through cooling system is used in 50% of all cases and recirculating system is used in another 50% of all cases.
- fraction, process water, to air: 0.205 dimensionless; name fraction_PW_to_air; lognormal variance with pedigree 0.092025, pedigree (4,4,3,2,4)
  Literature value (Statistics Canada, 2007 & Shaffer, K.H., 2008, Consumptive water use in the Great Lakes Basin, USGS) (Vionnet, S., Quantis Water Database - Technical Report, 2012).
- fraction, tap water, to air: 0.205 dimensionless; name fraction_TW_to_air; = fraction_PW_to_air; lognormal variance with pedigree 0.092025, pedigree (4,4,3,2,4)
  Calculated value. See comment in the other parametres present in this dataset. Tap water is considered to be always used as process water, thus process water fractions to air are applied to all tap water input flows to calculate the amount of water consumed in the processes.

## Reference product
- used vegetable cooking oil, purified: -1 kg; name used_veg_cook_oil_RP; By-product classification Recyclable; CPC 39120: Bran and other residues from the working of cereals or legumes; vegetable materials and vegetable waste, veget[…]
  Literature data & biodiesel producer
  EcoSpold01Location=FR
  production volume 1.63586e8 kg
    Estimated. The french production volume is extrapolated from the global production volume using the nominal GDP of 2005 (source: United Nations, http://data.un.org/Glossary.aspx?q=GDP+%28current+US%24%29, accessed 20130726 and 20130312).
    Gross domestic product (GDP) at current prices is GDP at prices of the current reporting period. Also known as nominal GDP.
  property carbon content, fossil 0.003
    The refined waste vegetable oil consists of 6.5% (wt.) of FAME and 93.5% (wt.) of triglycerides. The overall percentage weight of fossil carbon in the oil is 0.3% (wt.), corresponding to a 4.1% of fossil carbon in the 6.5% of FAME. The remaining carbon in the oil is biogenic carbon. (ecoinvent v2.2 report 17, pg 475)
  property carbon content, non-fossil 0.747
    (same comment as for used vegetable cooking oil, purified)
  property heating value, net 38.4 MJ
    Values is approximated from HHV from "vegetable oil, crude". Source: Radovanovic,M.; Zivanovic,T.; Stojiljkovic,D.; Jovanovic,V.; Jerinic,N.; Knezevic,S. et.al. Utilization of sunflower husk as a fuel for industrial boilers - 20 years experience. Proc. 5th Eur. Conf. on Industrial Furnaces&Boilers 2000,vol.2,p.221-233.
    Available at: https://phyllis.nl/Biomass/View/2152
  property price 0.362 EUR2005
    Temporary price data. Calculated as 90% of purchasers price based on: Assumed equal to palm oil
  properties: carbon allocation 0.75 kg, carbon content 0.75, dry mass 1 kg, water content 0, water in wet mass 0 kg, wet mass 1 kg

## Inputs from technosphere
- electricity, medium voltage: 0.041141 kWh; lognormal variance with pedigree 0.040025, pedigree (1,1,5,2,1)
  Literature data & biodiesel producer
  EcoSpold01Location=FR
  Uncertainty: Literature data & biodiesel producer
- fatty acid methyl ester: -0.9727 kg; name veg_oil_me_byP
  EcoSpold01Location=FR
  production volume
    Calculated from the production volume of used vegetable cooking oil, purified in proportion to the respective output amounts.
  properties: carbon content, fossil 0.041, carbon content, non-fossil 0.732, dry mass 1 kg, heating value, net 37.2 MJ, price 0.817 EUR2005, wet mass 1 kg
  note on heating value, net: Based on literature, report 17, page 439. Jungbluth, N., Chudacoff, M., Dauriat, A., Dinkel, F., Doka, G., Faist Emmenegger, M., Gnansounou, E., Kljun, N., Schleiss, K., Spielmann, M., Stettler, C., Sutter, J. 2007: Life Cycle Inventories of Bioenergy. ecoinvent report No. 17, Swiss Centre for Life Cycle Inventories, Dübendorf, CH.
- glycerine: -0.1061 kg; name glycerine_byP
  EcoSpold01Location=FR
  production volume
    (same comment as for fatty acid methyl ester)
  properties: carbon content, non-fossil 0.391304, dry mass 1 kg, heating value, net 18 MJ, price 0.792 EUR2005, wet mass 1 kg
  note on heating value, net: Based on literature, Report 17: Jungbluth, N., Chudacoff, M., Dauriat, A., Dinkel, F., Doka, G., Faist Emmenegger, M., Gnansounou, E., Kljun, N., Schleiss, K., Spielmann, M., Stettler, C., Sutter, J. 2007: Life Cycle Inventories of Bioenergy. ecoinvent report No. 17, Swiss Centre for Life Cycle Inventories, Dübendorf, CH.
- heat, district or industrial, natural gas: 0.89856 MJ; lognormal variance with pedigree 0.040025, pedigree (1,1,5,2,1)
  Literature data & biodiesel producer
  EcoSpold01Location=RER
  Uncertainty: Literature data & biodiesel producer
  properties: heating value, net 1 MJ
- methanol: 0.1105 kg; lognormal variance with pedigree 0.040025, pedigree (1,1,5,2,1)
  EcoSpold01Location=GLO
  Literature data & biodiesel producer
  Uncertainty: Literature data & biodiesel producer
  properties: carbon content, fossil 0.375, dry mass 1 kg, heating value, net 20 MJ, wet mass 1 kg
  note on heating value, net: Based on literature, page 533, Report 17: Jungbluth, N., Chudacoff, M., Dauriat, A., Dinkel, F., Doka, G., Faist Emmenegger, M., Gnansounou, E., Kljun, N., Schleiss, K., Spielmann, M., Stettler, C., Sutter, J. 2007: Life Cycle Inventories of Bioenergy. ecoinvent report No. 17, Swiss Centre for Life Cycle Inventories, Dübendorf, CH.
- phosphoric acid, industrial grade, without water, in 85% solution state: 0.0044768 kg; lognormal variance with pedigree 0.040025, pedigree (1,1,5,2,1)
  EcoSpold01Location=RER
  Literature data & biodiesel producer
  Uncertainty: Literature data & biodiesel producer
  properties: dry mass 1 kg, wet mass 1 kg
- potassium hydroxide: 0.011046 kg; lognormal variance with pedigree 0.040025, pedigree (1,1,5,2,1)
  (same comment as for heat, district or industrial, natural gas)
  properties: dry mass 0.856 kg, water content 0.168224, wet mass 1 kg
- tap water: 0.0162592 kg; name tap_water_input; source Sheenhan, J. 1998; lognormal variance with pedigree 0.052625, pedigree (3,3,5,2,1)
  Literature, environmental report
  Calculated based on literature (Sheenhan, J., 18, An Overview of Biodiesel and Petroleum Diesel Life Cycles; Omni Tech International, 2010, Life Cycle Impact of Soybean Production and Soy Industrial Products), (Vionnet, S., Quantis Water Database - Technical Report, 2012). Assumed to have the same water use as "soybean methyl ester, at esterification plant/US". The process starts when refined vegetable oil enters the plant. It includes the processes: prepurification, deacidification, transesterification, destilation, etc. It is assumed that 95% of water use is allocated to cooling water and 5% of water is allocated as process water.
  EcoSpold01Location=RER
  Uncertainty: Literature, environmental report
  properties: carbon content, fossil 0.00178991, dry mass 0.000337476 kg, water content 2962.17, wet mass 1 kg
  note on carbon content, fossil: Bicarbonate content is 2.93 mol/m3. CO2 content is 0.1 mol/m3 (ecoinvent v2.2 report 8, Tab 93.1).
- vegetable oil esterification facility: 9.0909e-10 unit; lognormal variance with pedigree 0.3501, pedigree (1,2,5,1,1)
  EcoSpold01Location=CH
  Calculation, according to feed capacity and lifetime of the plant
  Uncertainty: Calculation, according to feed capacity and lifetime of the plant
- wastewater, average: -6.0824e-5 m3; name ww_byP; lognormal variance with pedigree 0.088025, pedigree (5,5,1,2,1)
  Calculation, to close mass balance of process
  EcoSpold01Location=CH
  Uncertainty: Calculation, to close mass balance of process
  production volume
    (same comment as for fatty acid methyl ester)
  properties: carbon content, non-fossil 0.194039, dry mass 0.346837 kg, mass concentration, TOC 0.1091 kg/m3, mass concentration, calcium 0.039453 kg/m3, mass concentration, chlorine 0.030031 kg/m3, mass concentration, hydrogen 0.013365 kg/m3, mass concentration, nitrogen 0.031015 kg/m3, mass concentration, oxygen 0.069824 kg/m3, mass concentration, sodium 0.06456 kg/m3, mass concentration, sulfur 0.015602 kg/m3, water content 2882.2, wet mass 1000 kg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
  note on carbon content, non-fossil: 0.0673 kg TOC/m3 (Tab A.17, ecoinvent v2.2 report 13_I). TOC was considered as Total Carbon.

## Inputs from nature
- Carbon dioxide, in air [natural resource, in air]: 0.13558 kg; lognormal variance with pedigree 0.040025, pedigree (1,1,5,2,1)
  Calculation, to close carbon balance
  Uncertainty: Calculation, to close carbon balance
- Water, cooling, unspecified natural origin [natural resource, in water]: 0.000308925 m3; name water_cooling_UNO_input; source Sheenhan, J. 1998; lognormal variance with pedigree 0.0913, pedigree (2,3,5,3,4)
  Calculated based on literature (Sheenhan, J., 18, An Overview of Biodiesel and Petroleum Diesel Life Cycles; Omni Tech International, 2010, Life Cycle Impact of Soybean Production and Soy Industrial Products), (Vionnet, S., Quantis Water Database - Technical Report, 2012). Assumed to have the same water use as "soybean methyl ester, at esterification plant/US". The process starts when refined vegetable oil enters the plant. It includes the processes: prepurification, deacidification, transesterification, destilation, etc. The process ends when methyl ester leaves the plant. It is assumed that 95% of water use is allocated to cooling water and 5% of water is allocated as process water.
  property carbon content, fossil 0.0104329; name C_content_fossil
  property carbon content, non-fossil 0; name C_content_non_fossil
  property dry mass 0.1101 kg; name DM
  property water content 9081.65; name water_content
  property water in wet mass 999.89 kg; name WWM

## Emissions to nature
- Carbon dioxide, non-fossil [air, urban air close to ground]: 0.2155 kg; lognormal variance with pedigree 0.04, pedigree (1,1,5,1,1)
  Calculation, to close carbon balance
  Uncertainty: Calculation, to close carbon balance
- Water [air, unspecified]: 0.000123041 m3; name water_to_air_unspecified; = (tap_water_input/1000*fraction_TW_to_air)+(water_cooling_UNO_input*fraction_CW_to_air); lognormal variance with pedigree 0.0807, pedigree (2,2,5,1,1)
  Calculated value based on literature values and expert opinion. See comments in the parametres' comment field.
  property fraction, origin: fresh water 0.0270895; name fraction_origin_fresh_water
  property fraction, origin: salt water 0; name fraction_origin_salt_water
  property fraction, origin: unspecified 0.97291; name fraction_origin_unspecified
- Water [water, unspecified]: 0.000202142 m3; name water_to_water_unspecified; = (tap_water_input/1000)*(1-fraction_TW_to_air)+water_cooling_UNO_input*(1-fraction_CW_to_air); lognormal variance with pedigree 0.0807, pedigree (2,2,5,1,1)
  (same comment as for Water)
  property fraction, origin: fresh water 0.0639453; name fraction_origin_fresh_water_Ww
  property fraction, origin: salt water 0; name fraction_origin_salt_water_Ww
  property fraction, origin: unspecified 0.936055; name fraction_origin_unspecified_Ww

## Sampling procedure
Cross-checking of various literature sources from 1998 to 2006

## Review by Niels Jungbluth 2006-08-15
Passed.
none
