# purge gas, rich in sodium nitrate to market for sodium nitrate, unrefined

Dataset: EcoSpold 2, unit process
Geography: CL
Time period: 2019-01-01 to 2022-12-31
Technology level: current
Classification: ISIC rev.4 ecoinvent: 2012:Manufacture of fertilizers and nitrogen compounds
Scenario: Business-as-Usual
System model: Substitution, consequential, long-term
Generated by: Lucia Valsasina
Database: ecoinvent
isCopyrightProtected: true

## General comment
This activity represents a renaming activity. The activity links purge gas, rich in sodium nitrate to sodium nitrate, unrefined. This activity allows to model the reuse of purge gas in the production of potassium nitrate, industrial grade.

## Included activities start
The activity starts with the input of purge gas, rich in nitrate.

## Included activities end
The activity ends with the provision of sodium nitrate, unrefined.

## Reference product
- purge gas, rich in sodium nitrate: 1 kg; By-product classification Recyclable; CPC 88422: Fertilizer manufacturing services
  By-product of the potassium nitrate agricultural grade production. This product is futher used for the potassium nitrate production, industrial grade.
  production volume 1 kg
  properties: carbon allocation 0 kg, carbon content 0, price 0 EUR2005

## Inputs from technosphere
- sodium nitrate, unrefined: 1 kg
  Sodium nitrate reaching a purity of about 50%. This sodium nitrate is used in the production of potassium nitrate or will be further procecced to higher purities. So, this product is not sold on the market.
  production volume
    Purge gas is produced as a by-product of the production of sodium nitrate, agricultural grade. The total production volume is taken from the producing activity, 5% of the total is assumed to go to sodium nitrate, unrefined.
  properties: dry mass 1 kg, price 0.23 EUR2005, wet mass 1 kg
