# refinery gas, burned in furnace

Dataset: EcoSpold 2, unit process
Geography: RoW
Time period: 1980-01-01 to 2022-12-31
Technology level: current
Classification: ISIC rev.4 ecoinvent: 3530:Steam and air conditioning supply
Classification: EcoSpold01Categories: oil/heating systems
Scenario: Business-as-Usual
System model: Substitution, consequential, long-term
Share of production covered: 5 %
Generated by: Gregor Wernet
Published in: Jungbluth, N. 2007
Database: ecoinvent
isCopyrightProtected: true

## General comment
Description of the direct emissions due to the combustion of refinery gas in refinery furnaces and generators not including the infrastructure of the furnace.
[This dataset was already contained in the ecoinvent database version 2. It was not individually updated during the transfer to ecoinvent version 3. Life Cycle Impact Assessment results may still have changed, as they are affected by changes in the supply chain, i.e. in other datasets. This dataset was generated following the ecoinvent quality guidelines for version 2. It may have been subject to central changes described in the ecoinvent version 3 change report (http://www.ecoinvent.org/database/ecoinvent-version-3/reports-of-changes/), and the results of the central updates were reviewed extensively. The changes added e.g. consistent water flows and other information throughout the database. The documentation of this dataset can be found in the ecoinvent reports of version 2, which are still available via the ecoinvent website. The change report linked above covers all central changes that were made during the conversion process.]

## Included activities end
Consumption of refinery gas and combustion emissions.

## Geography
Data for single European plants.

## Technology
Average technology in use. There might be large differences for single plants due to the technology used for the flue gas treatment.

## Time period
New European data from single plants for regulated emissions like CO2, NOx, SOx etc. have been provided in the literature. They have been compared and discussed with older literature data.

## Reference product
- refinery gas: 1 kg; By-product classification allocatable product; CPC 33429: Other petroleum gases or gaseous hydrocarbons, except natural gas; lognormal variance with pedigree 0.0501, pedigree (3,4,5,3,1)
  Uncertainty: Literature data
  production volume 1 kg
  properties: carbon allocation 0.77 kg, carbon content 0.77, carbon content, fossil 0.77, carbon content, non-fossil 0, dry mass 1 kg, heating value, net 50.3 MJ, price 0 EUR2005, water content 0, water in wet mass 0 kg, wet mass 1 kg

## Inputs from technosphere
- heat, district or industrial, other than natural gas: 50.1637, 0.0875947 MJ (2 suppliers, which the file names only by identifier); sum of these 50.2513 MJ
  production volume
    This is a placeholder value that does not reflect real-world production volumes. This dataset does not currently require a real-world production volume to work in the database framework, and no actual data were collected yet. This has no negative effect on the results of the ecoinvent database.
  properties: corresponding fuel use, propane, furnace >100kW 1.05263 MJ, heating value, net 1 MJ, price 0.0106 EUR2005
  note on corresponding fuel use, propane, furnace >100kW: Lower heating value of the fuel input related to the heat/electricity output, taken directly from ecoinvent v3.0 dataset "heat production, natural gas, at industrial furnace >100kW, GLO 2000".

## Emissions to nature
- Carbon dioxide, fossil [air, urban air close to ground]: -2.8191 kg; lognormal variance with pedigree 0.0541, pedigree (3,4,5,3,1)
  Literature data
  Uncertainty: Literature data
- Carbon monoxide, fossil [air, urban air close to ground]: -0.000753769 kg; lognormal variance with pedigree 0.7041, pedigree (3,4,5,3,1)
  Literature data
  Uncertainty: Literature data
- Mercury II [air, urban air close to ground]: -6.98492e-8 kg; lognormal variance with pedigree 0.7041, pedigree (3,4,5,3,1)
  Literature data
  Uncertainty: Literature data
- Methane, fossil [air, urban air close to ground]: -0.000249749 kg; lognormal variance with pedigree 0.0941, pedigree (3,4,5,3,1)
  Literature data
  Uncertainty: Literature data
- NMVOC, non-methane volatile organic compounds [air, urban air close to ground]: -0.000249749 kg; lognormal variance with pedigree 0.1741, pedigree (3,4,5,3,1)
  Literature data
  Uncertainty: Literature data
- Nitrogen oxides [air, urban air close to ground]: -0.00226633 kg; lognormal variance with pedigree 0.32, pedigree (1,1,5,1,1)
  44.5% of Range for RER refineries
- Particulate Matter, < 2.5 um [air, urban air close to ground]: -0.000274372 kg; lognormal variance with pedigree 0.1626, pedigree (2,4,5,1,1)
  Literature data
  Uncertainty: Literature data
- Radon-222 [air, non-urban air or from high stacks]: -0.319598 kBq; lognormal variance with pedigree 0.1626, pedigree (2,4,5,1,1)
  Literature data
  Uncertainty: Literature data
- Sulfur dioxide [air, urban air close to ground]: -0.00139698 kg; lognormal variance with pedigree 1.79, pedigree (1,1,5,1,1)
  Range for RER refineries, Share for combustion

## Sampling procedure
Environmental reports and literature data.

## Extrapolations
From single plants to average situation.

## Review by Bo Weidema 2012-03-18
Passed for upload to database, in order to enable calculation check. The dataset will later be re/submitted for a more thorough review.
