# heat and power co-generation unit construction, 1MWel, 6.4 MWth

Dataset: EcoSpold 2, unit process
Geography: CH
Time period: 2016-01-01 to 2022-12-31
Technology level: current
Classification: ISIC rev.4 ecoinvent: 4220:Construction of utility projects
Classification: EcoSpold01Categories: natural gas/cogeneration
Scenario: Business-as-Usual
System model: Substitution, consequential, long-term
Generated by: [System]
Published in: S Hirchberg, S Wiemer, P Burgherr 2015
Database: ecoinvent
isCopyrightProtected: true

## General comment
This activity represents the construction and deconstruction of a heat and power cogeneration unit working on an Organic Rankine Cycle with a capacity of 1MWel and 6.4 MWth. The dataset was created for modelling power production in a deep geothermal power plant.
Detailed information on this dataset is presented in the book "Energy from the Earth. 2015. Hirschberg, Wiemer, Burgherr (eds.) (see field "Data Generator and Publication").

## Included activities start
Starting from the materials and land available for the construction of the building and the machines

## Included activities end
Ends with decommissioning of the plant.

## Reference product
- heat and power co-generation unit, 1MWel, 6.4MWth: 1 unit; name RP_amount_1; By-product classification allocatable product; CPC 4: Metal products, machinery and equipment
  production volume 0.02525 unit
    This is a placeholder value that does not reflect real-world production volumes. This dataset does not currently require a real-world production volume to work in the database framework, and no actual data were collected yet. This has no negative effect on the results of the ecoinvent database.
    The placeholder value of this dataset was calculated by scaling the placeholder value of the GLO dataset, using the Swiss average GDP share relative to the global GDP (based on constant 2017 international USD from 2015-2019, World Bank (2022)).
    Reference:
    World bank (2022). GDP, PPP (constant 2017 international $). https://data.worldbank.org/indicator/NY.GDP.MKTP.PP.KD (last accessed on 2022-05-17).
  property price 62157.6 EUR2005
    Calculated based on inputs: The price of the product has been calculated as a sum of the values of the material and energy inputs for this product. This value is therefore a rough estimation. It may underestimate the real price since there are additional expenses when producing any product. These expences can include for example labour costs, treatment of waste materials and profit for the producer. Please consider carefully whether this level of data quality is acceptable for your application.
  properties: carbon allocation 0 kg, carbon content 0

## Inputs from technosphere
- aluminium, cast alloy: 320 kg; name aluminium; lognormal variance with pedigree 0.0916, pedigree (4,4,5,4,4)
  Literature value. The inventory for the heat and power cogenerating unit is basically taken from Bauer 2007, with some extrapolations.
  Bauer, C. (2007) Holzenergie. In: Dones, R. (Ed.) et al., Sachbilanzen von Energiesystemen: Grundlagen für den ökologischen Vergleich von Energiesystemen und den Einbezug von Energiesystemen in Ökobilanzen für die Schweiz. Final report ecoinvent No. 6-IX, Paul Scherrer Institut Villigen, Swiss Centre for Life Cycle Inventories, Dübendorf, CH.
  properties: dry mass 1 kg, wet mass 1 kg
- benzene: 436 kg; lognormal variance with pedigree 0.0916, pedigree (4,4,5,4,4)
  Calculated from an input of 300kg Perfluoropentane (Density 1.664g/ml) and a desnity of 0.874g/ml for Benzene.
  Rogge, S. (2004). Geothermische Stromerzeugung in Deutschland. Ökonomie, Ökologie und Potenziale. Technical University Berlin, Germany.
  properties: carbon content, fossil 0.923077, dry mass 1 kg, heating value, net 42.5 MJ, wet mass 1 kg
- building, hall: 250 m2; lognormal variance with pedigree 0.0916, pedigree (4,4,5,4,4)
  (same comment as for aluminium, cast alloy)
- concrete, 30MPa: 14 m3; name concrete; lognormal variance with pedigree 0.0916, pedigree (4,4,5,4,4)
  Literature value. The inventory for the heat and power cogenerating unit is basically taken from Bauer 2007, with some extrapolations.
  Bauer, C. (2007) Holzenergie. In: Dones, R. (Ed.) et al., Sachbilanzen von Energiesystemen: Grundlagen für den ökologischen Vergleich von Energiesystemen und den Einbezug von Energiesystemen in Ökobilanzen für die Schweiz. Final report ecoinvent No. 6-IX, Paul Scherrer Institut Villigen, Swiss Centre for Life Cycle Inventories, Dübendorf, CH.
  The original value of 34'000kg concrete for the foundation was divided by a density of 2380 kg/m3.
  properties: dry mass 2205 kg, water content 0.0816327, wet mass 2385 kg
- copper, cathode: 320 kg; name copper; lognormal variance with pedigree 0.0916, pedigree (4,4,5,4,4)
  (same comment as for aluminium, cast alloy)
  properties: dry mass 1 kg, wet mass 1 kg
- electricity, medium voltage: 2400 kWh; lognormal variance with pedigree 0.0916, pedigree (4,4,5,4,4)
  (same comment as for aluminium, cast alloy)
- heat, central or small-scale, other than natural gas: 300 MJ; lognormal variance with pedigree 0.0916, pedigree (4,4,5,4,4)
  (same comment as for aluminium, cast alloy)
  properties: heating value, net 1 MJ
- polyethylene, high density, granulate: 340 kg; name polyethylene; lognormal variance with pedigree 0.0916, pedigree (4,4,5,4,4)
  (same comment as for aluminium, cast alloy)
  properties: carbon content, fossil 0.857143, dry mass 1 kg, heating value, net 42.47 MJ, wet mass 1 kg
  note on carbon content, fossil: Polyethylene is formed out of a huge amount of ethylene monomers (C2H4) (ecoinvent v2.2 report 11_II). MW=28 g/mol
- scrap aluminium: -320 kg; name BP_amount_4; = aluminium
  production volume
    Calculated from production volume of reference product using the relative outputs.
  properties: dry mass 1 kg, wet mass 1 kg
- scrap copper: -320 kg; name BP_amount_5; = copper
  production volume
    Calculated from production volume of reference product using the relative outputs.
  properties: dry mass 1 kg, wet mass 1 kg
- scrap steel: -39460 kg; name BP_amount_6; = chromium_steel+steel
  production volume
    Calculated from production volume of reference product using the relative outputs.
  properties: dry mass 1 kg, wet mass 1 kg
- sheet rolling, aluminium: 320 kg; = aluminium
  activityLink introduced to establish a direct link to the corresponding regional supply of this product
- sheet rolling, chromium steel: 460 kg; = chromium_steel
  (same comment as for sheet rolling, aluminium)
- sheet rolling, steel: 39000 kg; = steel
  (same comment as for sheet rolling, aluminium)
- solvent, organic: -436 kg; name BP_amount_7; = benzene
  production volume
    Calculated from production volume of reference product using the relative outputs.
  properties: carbon content, fossil 0.63072, dry mass 1 kg, heating value, net 19.11 MJ, price 1.36 EUR2005, wet mass 1 kg
- steel, chromium steel 18/8: 460 kg; name chromium_steel; lognormal variance with pedigree 0.0916, pedigree (4,4,5,4,4)
  (same comment as for aluminium, cast alloy)
  properties: carbon content, fossil 0.0008, dry mass 1 kg, wet mass 1 kg
  note on carbon content, fossil: Stainless steel model is the grade 304 steel (18/8 stainless, 18% chromium 8% nickel; max. 0.08% C)
- steel, low-alloyed: 39000 kg; name steel; lognormal variance with pedigree 0.0916, pedigree (4,4,5,4,4)
  Literature value/estimation. The amount of steel mass is estimated based on a 1MW plant in Rogge (2004). Weights of the different ORC components: Evaporator (11t), boiler (4t), turbine (3t), generator (4t), pump for working fluid (1t), condenser of the organic circulating fluid (16t).
  Rogge, S. (2004). Geothermische Stromerzeugung in Deutschland. Ökonomie, Ökologie und Potenziale. Technical University Berlin, Germany.
  properties: carbon content, fossil 0.005, dry mass 1 kg, wet mass 1 kg
- stone wool: 90 kg; name rock_wool; lognormal variance with pedigree 0.0916, pedigree (4,4,5,4,4)
  (same comment as for aluminium, cast alloy)
  properties: carbon content, fossil 0.015401, dry mass 1 kg, wet mass 1 kg
  note on carbon content, fossil: The chemical composition of the glass fibres used in the rock wool production is similar to the composition of naturally cooled volcano basalt and has a composition listed in Tab. 3.1 and 3.2 in ecoinvent v2.2 report 16, part XIV. Rock wool contains: a minimum of 96% mineral fibres,between 0.5 and 3.0 weight percent of phenolic resin depending on the specific product characteristics, and about 0.2 percent mineral oil (ecoinvent v2.2 report 16, part XIV). An average composition of 1.8% phenolic resin, 0.2% mineral oil, and 98% mineral fibres has been assumed and used to calculate C content of the rock wool
- waste concrete: -14 kg; name BP_amount_1; = concrete
  production volume
    Calculated from production volume of reference product using the relative outputs.
  properties: dry mass 0.5 kg, water content 1, wet mass 1 kg
- waste mineral wool: -90 kg; name BP_amount_3; = rock_wool
  production volume
    Calculated from production volume of reference product using the relative outputs.
  properties: dry mass 1 kg, wet mass 1 kg
- waste polyethylene/polypropylene product: -340 kg; name BP_amount_2; = polyethylene
  production volume
    Calculated from production volume of reference product using the relative outputs.
  properties: carbon content, fossil 0.748045, dry mass 0.847 kg, heating value, net 42.47 MJ, water content 0.180638, wet mass 1 kg
  note on carbon content, fossil: Mixed various plastics was used to estimate the C content of this waste (Tab A.2, ecoinvent v2.2 report 13_I)
- wire drawing, copper: 320 kg; = copper
  (same comment as for sheet rolling, aluminium)

## Sampling procedure
Extrapolated from literature
