# cork forestry

Dataset: EcoSpold 2, unit process
Geography: PT
Time period: 1996-01-01 to 2022-12-31
Technology level: current
Classification: ISIC rev.4 ecoinvent: 0230:Gathering of non-wood forest products
Tags: Swiss brush-up completed
Scenario: Business-as-Usual
System model: Substitution, consequential, long-term
Generated by: Frank Werner
Published in: Kellenberger D. 2007
Database: ecoinvent
isCopyrightProtected: true

## General comment
The datasets covers cork production in an silvipastoral extensive management system as common in Portugal. The dataset refers to the yield of 1 hectare over the rotation period of 140 as the maximum rotation period in commercial cork production in Portugal.

## Included activities end
Includes manual harvesting of the cork (every 9 years) and motor-manual processes for thinning and final cutting of the trees. Also included are the transport of the workers to the forests for harvesting cork and the transport of the products to the nearest forest road.

## Geography
data for Germany used for the forestry processes

## Technology
The harvesting of wood considers the motor-manual processes for 'Buche, II. Ertragsklasse, starke Durchforstung'

## Time period
cork yield data from yield table (Batista et al. 2012; see exchanges for details on source)

## Reference product
- cork, raw: 1 kg; name m_cork; = 34.48*1000; source Baptista Coelho, M. 2012; By-product classification allocatable product; CPC 03220: Natural cork, raw or simply prepared
  Yield over one rotation of 140 years in Mg converted to kg
  production volume 9.92e7 kg
    Annual global production of cork is about 200,000 tons; 49.6% from Portugal, 30.5% from Spain, 5.8% from Morocco, 4.9% from Algeria, 3.5% from Tunisia, 3.1% Italy, and 2.6% from France. (based on http://en.wikipedia.org/wiki/Cork; accesed 20152.11.01)
  property carbon content, non-fossil 0.54
    Average carbon contents of cork (54 %(w/w)). Calculated from average composition of cork and it's components (sources: www, Roempp, Uhlmann)
  property heating value, net 16.36 MJ
    LHV is calculated based on the Carbon content of the product. More details can be found on the respective documentation.
  property price 2.69 EUR2005
    Temporary price data. Calculated as 90% of purchasers price based on: 2004 prices for World Import/Export data (US$ and tonnes) from UN Commodity Trade Statistics Database (http://data.un.org/Explorer.aspxDatabase [Accessed 10th June 2010]).
  properties: carbon allocation 0.54 kg, carbon content 0.54, carbon content, fossil 0, dry mass 1 kg, water content 0, water in wet mass 0 kg, wet mass 1 kg

## Inputs from technosphere
- cleft timber, measured as dry mass: -5.91589 kg; name cleft_timber; = 203.98*1000; source Baptista Coelho, M. 2012; lognormal variance with pedigree 0.0256, pedigree (2,1,1,1,1)
  Yield over one rotation of 140 years in Mg converted to kg
  production volume
    Calculated from production volume of reference product using the relative outputs.
  property apparent wood density 1102.68 kg/m3; name cleft_timber_apparent_wood_d; = cleft_timber_basic_wood_d*(1+cleft_timber_water_content)
  property basic wood density 848.214; name cleft_timber_basic_wood_d; = cleft_timber_dry_wood_d/(1+30*0.004)
  property carbon content, non-fossil 0.494; name cleft_timber_C_content_non_fossil
  property dry wood density 950 kg/m3; name cleft_timber_dry_wood_d
  property heating value, gross 20.4 MJ; name cleft_timber_Gross_Heat_Value
  property heating value, net 14.46 MJ; name cleft_timber_Net_Heat_Value
  property water content 0.3; name cleft_timber_water_content
  property water in wet mass 0.3 kg; name cleft_timber_WWM
  properties: dry mass 1 kg, price 0.073 EUR2005, wet mass 1.3 kg
  note on basic wood density: dry mass/wet volume, adjust for the shrinkage of 0.4% Volume per % change in moisture below 30% moisture content
- diesel, burned in building machine: 0.10758 MJ; = 0.10758*m_cork; source Kellenberger D. 2007; lognormal variance with pedigree 0.0751, pedigree (1,2,5,5,3)
  value for mechanical works per kg cork from ecoinvent 2.2, multiplied with total yield over one rotation; source: Kellenberger, D., H.-J. Althaus, T. Künniger, M. Lehmann, N. Jungbluth and P. Thalmann (2007): Life cycle inventories of building products. Final report ecoinvent 2000 No. 7, EMPA Duebendorf, Swiss Centre for Life Cycle Inventories, Duebendorf, CH.
  properties: UVEK_link_1 732, UVEK_relative_amount_1 1, heating value, net 1 MJ
  note on UVEK_link_1: to be used only in special submissions in coordination with ecoinvent and the Swiss FOEN
- power sawing, without catalytic converter: 0.00105213 hour; = 0.00035071*m_cork*3; source Kellenberger D. 2007; lognormal variance with pedigree 0.0751, pedigree (1,2,5,5,3)
  value for power sawing for final harvest per kg cork from ecoinvent 2.2, multiplied with total yield over one rotation and extrapolated to total power sawing per hectare, assuming that final harvest yields 1/3 of total wood harvest over one rotation period; source: Kellenberger, D., H.-J. Althaus, T. Künniger, M. Lehmann, N. Jungbluth and P. Thalmann (2007): Life cycle inventories of building products. Final report ecoinvent 2000 No. 7, EMPA Duebendorf, Swiss Centre for Life Cycle Inventories, Duebendorf, CH.
- transport, passenger car: 0.00011848 km; = 0.00011848*m_cork; source Kellenberger D. 2007; lognormal variance with pedigree 0.39, pedigree (1,1,5,1,1)
  value for transport of workers (for manual debarking) per kg cork from ecoinvent 2.2, multiplied with total yield over one rotation; source: Kellenberger, D., H.-J. Althaus, T. Künniger, M. Lehmann, N. Jungbluth and P. Thalmann (2007): Life cycle inventories of building products. Final report ecoinvent 2000 No. 7, EMPA Duebendorf, Swiss Centre for Life Cycle Inventories, Duebendorf, CH.
  properties: UVEK_link_1 4483, UVEK_relative_amount_1 1

## Inputs from nature
- Carbon dioxide, in air [natural resource, in air]: 12.527 kg; = (m_cork+cleft_timber)*0.494/12*(12+2*16); source Frischknecht R. 2007; lognormal variance with pedigree 0.065, pedigree (1,1,5,1,1)
  Total dry mass converted to carbon (0.494 kg C/kg dry wood) and converted to CO2 via molar relationship
- Energy, gross calorific value, in biomass [natural resource, biotic]: 135.552 MJ; = (m_cork+cleft_timber)*19.6; source Frischknecht R. 2007; lognormal variance with pedigree 0.065, pedigree (1,1,5,1,1)
  total dry mass x gross calorific value of hardwood
- Occupation, forest, extensive [natural resource, land]: 18.2715 m2*year; = 140*10000*0.45; source Baptista Coelho, M. 2012; lognormal variance with pedigree 0.24, pedigree (1,1,5,1,1)
  Dataset refers to 1 ha (=10000 m2/ha) over one rotation with a commercial rotation length of 140 years. According to the source, only 2% of Portuguese cork forests reach a crown cover of > 50%; thus it is assumed that on average 45% of the area is dedicated to cork production whereas the other 55% of the land are dedicated to pastoral activities.
- Transformation, from forest, extensive [natural resource, land]: 0.13051 m2; = 10000*0.45; source Baptista Coelho, M. 2012; lognormal variance with pedigree 0.39, pedigree (1,1,5,1,1)
  dataset refers to 1 ha (=10000 m2/ha) over one rotation. Cork production is a silvipastoral activity; according to the source, only 2% of Portuguese cork forests reach a crown cover of > 50%; thus it is assumed that on average 45% of the area is dedicated to cork production whereas the other 55% of the land are dedicated to pastoral activities.
- Transformation, to forest, extensive [natural resource, land]: 0.13051 m2; = 10000*0.45; source Baptista Coelho, M. 2012; lognormal variance with pedigree 0.39, pedigree (1,1,5,1,1)
  (same comment as for Transformation, from forest, extensive)
- Wood, hard, standing [natural resource, biotic]: 0.00697453 m3; = cleft_timber/950*(1+30*0.004); source Knapic, S. 2008; lognormal variance with pedigree 0.065, pedigree (1,1,5,1,1)
  total wood harvest in kg oven-dry converted to m3 oven-dry mass/oven-dry volume (average 950 kg/m3), converted to apparent volume assuming a shrinkage ratio of 0.4% volume per % change in moisture content below 30% moisture content

## Sampling procedure
literature

## Extrapolations
see geography and technology
