# containerboard production, fluting medium, semichemical

Dataset: EcoSpold 2, unit process
Geography: RoW
Time period: 2018-01-01 to 2022-12-31
Technology level: current
Classification: ISIC rev.4 ecoinvent: 1702:Manufacture of corrugated paper and paperboard and of containers of paper a
Scenario: Business-as-Usual
System model: Substitution, consequential, long-term
Generated by: Nora Minas
Published in: FEFCO Corrugated Packaging 2018
Database: ecoinvent
isCopyrightProtected: true

## General comment
This dataset has been extrapolated from respective regional geographies (RER). Semichemical fluting medium is a grade of corrugated base paper, which forms the corrugated middle layer in the production of corrugated board, where is covered between two outer layers of linerboard (e.g. kraftliner or testliner). According to the common sector terminology, semichemical fluting is made from virgin material as opposed to “wellenstoff”, which is used interchangeably with semichemical fluting but is made from recycled material, i.e. uses recovered paper as raw material.
Data for the production of semichemical fluting medium were provided by the industry association of corrugated packaging manufacturers in Europe (The European Federation of Corrugated Board Manufacturers, FEFCO). The data for Semichemical Fluting and Kraftliner jointly represent ca. 85% of the total annual production of corrugated base papers from primary fibres in Europe. The data for Semichemical Fluting and Kraftliner also jointly represent ca. 90% of the total consumption of these grades for corrugated board production in Europe. Primary data were provided by large mills in Austria, Finland, France, Germany, Portugal, Poland, and Sweden. Together these mills produced 5 438 000 tonnes of paper products (not only semichemical fluting) in 2017. Thereby each mill has a production volume of about 94 000 to 1 128 000 tonnes net saleable paper product (FEFCO, 2018.). FEFCO. 2018. European Database for Corrugated Board Life Cycle Studies 2018. Reference(s): https://www.fefco.org/sites/default/files/documents/LCA%20Report%202019_revised_%20p%2037.pdf, accessed September 2022.
In FEFCO 2018 fuel consumption and the related emission to air include only steam and net electricity used on site. Sold electricity is not reported as a sold product and the associated input and output data are not included in the inventory. The fuel consumption and emissions to air associated with the total heat production and the net electricity used on site were allocated to the paper production.
The following air emissions were reported in the study: CO2 (fossil and biogenic), CO, NOx (as NO2), SOx (as SO2), TRS (H2S as S), Dust.
For a more complete air emission profile, additional air emissions (beyond the ones listed above) were added for the combustion of the external fuels and internal using LCI datasets for combustion of different fuels as proxy. The air emissions were calculated based on the mix of the internal and external fuels in the study and more information about the fuel mix and the proxy are provided under "Extrapolations". No proxy was available for the combustion of black liquor. Emissions from this internal energy generation processes are therefore only reflected in the key emission factors provided by the industry.
The production volume is valid for the year 2018. Inventory data were collected for the year 2018.

## Included activities start
The process for the production of semichemical fluting starts with the reception of wood and wood chips at the mill gate.

## Included activities end
The process ends with the production of semichemical fluting medium. Processes include chipping, screening of chips, cooking to pulp for (semichemical cooking process).

## Geography
This dataset has been extrapolated from respective regional geographies (RER). Data for main producers in Europe (Austria, Finland, France, Germany, Portugal, Poland, and Sweden).

## Technology
Average of present used technology
The semichemical cooking process is a slightly alkaline cooking process with sodium sulphite and sodium carbonate as active cooking chemicals with a pulp yield of around 80%. The pulp produced is defiberized in refiners, screened and washed before being sent to the paper mill. Semichemical fluting is normally a one ply product and therefore requires a paper machine with one head box and normally also one wire.

## Reference product
- containerboard, fluting medium: 1 kg; name flutingAmount; By-product classification allocatable product; CPC 32151: Corrugated paper and paperboard
  production volume 3.62233e9 kg
    Estimation corss-checked with industry information: In Europe corrugated board box production (FEFCO Annual Statistics 2018) has a share of 70% in production volume of "case materials" (FAOSTAT http://www.fao.org/faostat/en/#data/FO). The same share is applied to gloabal production volume of "case materials" and multiplied by European average consumption of semichemical fluting in total raw material consumption of corrugated board production (from FEFCO Annual Statistics 2018 (https://www.fefco.org/sites/default/files/documents/Fefco_AnnualEvaluation_2018.pdf, last accessed May 2022).
  property price 0.598 EUR2005
    Export prices for the World+ according to: http://faostat.fao.org/site/626/DesktopDefault.aspx?PageID=626#ancor downloaded 28 April 2009; calculated as export value divided by export volume.
  properties: carbon allocation 0.425923 kg, carbon content 0.46, carbon content, fossil 0, carbon content, non-fossil 0.46, dry mass 0.92592 kg, heating value, net 15.92 MJ, water content 0.0800069, water in wet mass 0.07408 kg, wet mass 1 kg

## Inputs from technosphere
- alkylketene dimer sizing agent, for paper production: 3.4e-5 kg; lognormal variance with pedigree 0.0034, pedigree (1,3,2,5,1)
  FEFCO2018. Reported as sizing agents.
  properties: carbon content, non-fossil 0.538229, dry mass 1 kg, heating value, net 16.31 MJ, wet mass 1 kg
- aluminium sulfate, powder: 0.00167 kg; lognormal variance with pedigree 0.0034, pedigree (1,3,2,5,1)
  FEFCO 2018. Proxy for alum Al2(SO4)3.
  properties: dry mass 1 kg, wet mass 1 kg
- ammonia, anhydrous, liquid: 0.000345753, 7.03466e-5, 0.000671178, 0.00258537, 0.000314475, 0.000208249, 0.00743957, 0.00068506 kg (8 suppliers, which the file names only by identifier); sum of these 0.01232 kg; lognormal variance with pedigree 0.0034, pedigree (1,3,2,5,1)
  FEFCO 2018. Reported as NH3
  properties: dry mass 1 kg, wet mass 1 kg
- ash from paper production sludge: -0.00865 kg; name inorganicAshAmount; lognormal variance with pedigree 0.0034, pedigree (1,3,2,5,1)
  Calculated value. The reported value by FEFCO (2018) of residue, inorganic ashes, 80 % dry content of 2,04 kg/t is lower than the calculated value of coal and lignite ash from the combustion processes. Thus, the calculated value was used instead of the reported value
  production volume
    Calculated from production volume of reference flow.
  properties: carbon content, non-fossil 0.0092, dry mass 0.8 kg, water content 0.25, wet mass 1 kg
- core board: 0.002945 kg; lognormal variance with pedigree 0.0114, pedigree (1,3,2,5,3)
  FEFCO 2018. Reported as paper consumption for corrugated board production. Cores (2.9 kg) and core plugs (0.045 kg) summed. Both values for cores and core plugs are labeled as "limited data available" in FEFCO 2018.
  properties: carbon content, non-fossil 0.430314, dry mass 0.945 kg, heating value, net 12.19 MJ, water content 0.0582011, wet mass 1 kg
- corrugated board box: 0.00077419, 0.00179697, 2.88386e-5 kg (3 suppliers, which the file names only by identifier); sum of these 0.0026 kg; lognormal variance with pedigree 0.0034, pedigree (1,3,2,5,1)
  FEFCO 2018. Proxy for paper and board for packaging
  properties: carbon content, fossil 0.00365437, carbon content, non-fossil 0.450248, dry mass 0.945 kg, heating value, net 12.86 MJ, water content 0.0582011, wet mass 1 kg
- diesel, low-sulfur: 5.29784e-7, 0.000190697, 7.9126e-6, 1.59706e-5, 1.20068e-6, 7.98794e-6 kg (6 suppliers, which the file names only by identifier); sum of these 0.000224299 kg; lognormal variance with pedigree 0.0115, pedigree (2,2,2,5,3)
  Data provided by FEFCO 2018, indicated in energy content and given as 0.0096 GJ/t Calculation into mass/volume was done by using the following conversion factor: Diesel MJ/kg 42.8. Based on literature, page 16, Report6, part 4. Source: https://ecoinvent.org/wp-content/uploads/2021/09/LHV_fuels.xlsx
  Uncertainty: Uncertainty accounts for both the uncertainty associated with the fuel consumption value reported by FEFCO and the lower heating value used to convert the exchange value to a mass basis.
  properties: carbon content, fossil 0.865, dry mass 1 kg, heating value, net 42.8 MJ, wet mass 1 kg
- dithiocarbamate-compound: 3e-7 kg; lognormal variance with pedigree 0.0114, pedigree (1,3,2,5,3)
  FEFCO 2018. Reported as biocide. Assumed equally split between dithiocarbamate and triazine-compound
  properties: carbon content, fossil 0.179339, dry mass 1 kg, wet mass 1 kg
- electricity, medium voltage: 0.0193508, 0.013406, 0.000718555, 0.159657, 0.000724014, 0.00919885 kWh (6 suppliers, which the file names only by identifier); sum of these 0.203056 kWh; lognormal variance with pedigree 0.0034, pedigree (1,3,2,5,1)
  FEFCO 2018. Reported as bought electricity
- ethoxylated alcohol (AE3): 1.6e-5 kg; lognormal variance with pedigree 0.0034, pedigree (1,3,2,5,1)
  FEFCO 2018. Proxy for defoamer, unspecified.
  properties: carbon content, fossil 0.207952, carbon content, non-fossil 0.485221, dry mass 1 kg, heating value, net 21 MJ, wet mass 1 kg
- hard coal: 0.000891039, 0.000909284, 0.00132844, 0.00196509, 0.00148098, 0.000386683, 0.000211437, 0.00630609 kg (8 suppliers, which the file names only by identifier); sum of these 0.013479 kg; lognormal variance with pedigree 0.0115, pedigree (2,2,2,5,3)
  Data provided by FEFCO 2018, indicated in energy content and given as 0.3762 GJ/t . Calculation into mass/volume was done by using the following conversion factor: Hard coal: MJ/kg 27.91. Based on the Characterization factor of Hard coal in the CED method. Source: https://ecoinvent.org/wp-content/uploads/2021/09/LHV_fuels.xlsx
  Uncertainty: Uncertainty accounts for both the uncertainty associated with the fuel consumption value reported by FEFCO and the lower heating value used to convert the exchange value to a mass basis.
  properties: carbon content, fossil 0.845, dry mass 0.94 kg, heating value, net 27.91 MJ, water content 0.0638298, wet mass 1 kg
- heavy fuel oil: 0.000174435, 3.43118e-5, 0.000226182, 3.28413e-5, 0.00407768, 5.89234e-5 kg (6 suppliers, which the file names only by identifier); sum of these 0.00460437 kg; lognormal variance with pedigree 0.0115, pedigree (2,2,2,5,3)
  Data provided by FEFCO 2018, indicated in energy content and given as 0.1897 GJ/t. Calculation into mass/volume was done by using the following conversion factor: Heavy fuel oil: MJ/kg 41.2. Based on literature, page 21, Report6, part 4. Source: https://ecoinvent.org/wp-content/uploads/2021/09/LHV_fuels.xlsx
  Uncertainty: Uncertainty accounts for both the uncertainty associated with the fuel consumption value reported by FEFCO and the lower heating value used to convert the exchange value to a mass basis.
  properties: carbon content, fossil 0.849, dry mass 1 kg, heating value, net 41.2 MJ, wet mass 1 kg
- light fuel oil: 7.57871e-6, 1.09297e-6, 1.4707e-6, 1.015e-6, 0.000410167, 1.52956e-5 kg (6 suppliers, which the file names only by identifier); sum of these 0.00043662 kg; lognormal variance with pedigree 0.0115, pedigree (2,2,2,5,3)
  Data provided by FEFCO 2018, indicated in energy content and given as 0.0186 GJ/t.Calculation into mass/volume was done by using the following conversion factor: Light fuel oil: MJ/kg 42.6 Based on literature, page 18, Report6, part 4. Source: https://ecoinvent.org/wp-content/uploads/2021/09/LHV_fuels.xlsx
  Uncertainty: Uncertainty accounts for both the uncertainty associated with the fuel consumption value reported by FEFCO and the lower heating value used to convert the exchange value to a mass basis.
  properties: carbon content, fossil 0.862, dry mass 1 kg, heating value, net 42.6 MJ, wet mass 1 kg
- limestone residue: -7e-6 kg; name wasteCalciumCarbonateAmount; lognormal variance with pedigree 0.0034, pedigree (1,3,2,5,1)
  Reported by FEFCO (2018) as "Calcium carbonate" 75% dry content
  production volume
    Calculated from production volume of reference flow.
  properties: carbon content, fossil 0.120005, dry mass 0.75 kg, water content 0.333333, wet mass 1 kg
- magnesium oxide: 0.00111 kg; lognormal variance with pedigree 0.0034, pedigree (1,3,2,5,1)
  FEFCO 2018
  properties: dry mass 1 kg, wet mass 1 kg
- municipal solid waste: -5.36942e-6, -3.75731e-6, -0.010546, -1.49114e-5 kg (4 suppliers, which the file names only by identifier); sum of these -0.01057 kg; lognormal variance with pedigree 0.0034, pedigree (1,3,2,5,1)
  Reported by FEFCO (2018) as "residue, rejects, paper-related" (3,52 kg), representing paper clips, tags, adhesive labels, fibres etc. and "residue, rejects, other" (7,05 kg), representing e.g. glass, sand, plastics. Dry content 50%
  production volume
    Calculated from production volume of reference product using the relative outputs.
  properties: carbon content, fossil 0.171549, carbon content, non-fossil 0.261655, dry mass 0.5 kg, heating value, net 11.74 MJ, water content 1, wet mass 1 kg
- natural gas, high pressure: 8.22737e-6, 1.15741e-5, 1.81699e-5, 9.06405e-6, 2.92141e-5, 1.26548e-5, 0.000737429, 6.32392e-5, 3.1515e-5, 0.000152276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 m3 (24 suppliers, which the file names only by identifier); sum of these 0.00220513 m3; lognormal variance with pedigree 0.0115, pedigree (2,2,2,5,3)
  Data provided by FEFCO 2018, indicated in energy content and given as 0.086 GJ/t.Calculation into mass/volume was done by using the following conversion factor: 39 MJ/m3. Literature value, Source: United Nations Statistics Division (2018) International Recommendations for Energy Statistics (IRES). Available at: http://unstats.un.org/unsd/statcom/doc11/BG-IRES.pdf.
  properties: carbon content, fossil 0.75, dry mass 0.84 kg, heating value, net 39 MJ, wet mass 0.84 kg
- packaging film, low density polyethylene: 6e-6 kg; lognormal variance with pedigree 0.0034, pedigree (1,3,2,5,1)
  FEFCO 2018. Proxy for PE.
  properties: carbon content, fossil 0.857143, dry mass 1 kg, heating value, net 42.47 MJ, wet mass 1 kg
- paper mill, integrated: 5.43478e-11 unit; = 1 / 50 / 368000; lognormal variance with pedigree 0.4706, pedigree (4,3,5,5,5)
  Estimated value with lifetime (50 years) and yearly production (368 kt) of underlying ecoinvent process (integrated paper mill).
- peat: 0.243 kg; lognormal variance with pedigree 0.012, pedigree (2,3,2,5,3)
  FEFCO 2018. Reported as 2.43 GJ /ton net saleable product. converted with a LHV of 10 MJ/kg. LHV represents an indicative value. Reference: Nature and Management of Tropical Peat Soils, FAO Soils Bulletin 59, available at: http://www.fao.org/3/x5872e/x5872e00.htm#Contents
  Uncertainty: Uncertainty accounts for both the uncertainty associated with the fuel consumption value reported by FEFCO and the lower heating value used to convert the exchange value to a mass basis.
  properties: carbon content, fossil 0.59, dry mass 0.42 kg, heating value, net 10 MJ, water content 1.38095, wet mass 1 kg
- pulpwood, hardwood, measured as solid wood under bark: 0.00158233 m3; lognormal variance with pedigree 0.0034, pedigree (1,3,2,5,1)
  This value represents a calculated value, i.e., it is not based on FEFCO (2018) data. There was found to be an imbalance in carbon and therefore this value had to be recalculated to close the balance. The original amount reported by FEFCO (2018) is 0.83 bone dry tonnes of HW. The split of the different HW inputs is based on the market shares for pulpwood, hardwood, measured as solid wood under bark
  properties: basic wood density 563.2, carbon content, non-fossil 0.494, dry mass 614.284 kg, heating value, net 6071.3 MJ, water content 0.8, wet mass 1105.71 kg
- quicklime, milled, loose: 0.000908 kg; lognormal variance with pedigree 0.0034, pedigree (1,3,2,5,1)
  FEFCO 2018. Reported as CaO
  properties: dry mass 0.99 kg, water content 0.010101, wet mass 1 kg
- retention aid, for paper production: 9.6e-6 kg; lognormal variance with pedigree 0.0034, pedigree (1,3,2,5,1)
  FEFCO 2018. Proxy for polymer and retention agents
  properties: carbon content, fossil 0.5, dry mass 1 kg, heating value, net 15.15 MJ, wet mass 1 kg
- sludge from pulp and paper production: -0.03747 kg; name sludgeTotalAmount; lognormal variance with pedigree 0.0034, pedigree (1,3,2,5,1)
  FEFCO 2018. Reported as residue, inorganic sludges (1.35 kg, 65% dry content) and organic sludges (36.12 kg, 35% dry content).
  production volume
    Calculated from production volume of reference flow.
  properties: carbon content, non-fossil 0.21, dry mass 0.360809 kg, heating value, net 2.65 MJ, water content 1.77155, wet mass 1 kg
- soda ash, dense: 0.01237 kg; lognormal variance with pedigree 0.0034, pedigree (1,3,2,5,1)
  FEFCO 2018
  properties: carbon content, fossil 0.113208, dry mass 1 kg, heating value, net 3.43 MJ, wet mass 1 kg
- sodium hydroxide, without water, in 50% solution state: 0.00708 kg; lognormal variance with pedigree 0.0114, pedigree (1,3,2,5,3)
  FEFCO 2018
  properties: dry mass 1 kg, heating value, net 3.03 MJ, wet mass 1 kg
- sulfur: 0.00469 kg; lognormal variance with pedigree 0.0034, pedigree (1,3,2,5,1)
  FEFCO 2018
  properties: dry mass 1 kg, wet mass 1 kg
- sulfur dioxide, liquid: 4e-5 kg; lognormal variance with pedigree 0.0034, pedigree (1,3,2,5,1)
  FEFCO 2018
  properties: dry mass 1 kg, wet mass 1 kg
- sulfuric acid: 0.00025 kg; lognormal variance with pedigree 0.0034, pedigree (1,3,2,5,1)
  FEFCO 2018
  properties: dry mass 1 kg, wet mass 1 kg
- tall oil, crude: -0.00593 kg; name tallOilAmount; lognormal variance with pedigree 0.0034, pedigree (1,3,2,5,1)
  Reported by FEFCO (2018) as sold byproduct
  production volume
    Calculated from production volume of reference product using the relative outputs.
  property carbon content, fossil 0; name tallOilAmount_C_content_fossil
  property carbon content, non-fossil 0.786; name tallOilAmount_C_content_non_fossil
  properties: dry mass 1 kg, heating value, net 23.82 MJ, price 0.652995 EUR2005, wet mass 1 kg
- triazine-compound, unspecified: 3e-7 kg; lognormal variance with pedigree 0.0114, pedigree (1,3,2,5,3)
  (same comment as for dithiocarbamate-compound)
  properties: carbon content, fossil 0.475616, dry mass 1 kg, wet mass 1 kg
- turpentine: -0.00058 kg; name turpentineAmount; lognormal variance with pedigree 0.0034, pedigree (1,3,2,5,1)
  Reported by FEFCO (2018) as sold byproduct
  production volume
    Calculated from production volume of reference product using the relative outputs.
  property carbon content, fossil 0; name turpentineAmount_C_content_fossil
  property carbon content, non-fossil 0.882353; name turpentineAmount_C_content_non_fossil
  properties: dry mass 1 kg, heating value, net 26.74 MJ, price 1.826 EUR2005, wet mass 1 kg
- waste mineral oil: -9.5e-6 kg; name wasteLubricantsOilAmount; lognormal variance with pedigree 0.0034, pedigree (1,3,2,5,1)
  FEFCO 2018. Reported as residue, lubricants and oil, 100 % dry content
  production volume
    Calculated from production volume of reference flow.
  properties: carbon content, fossil 0.864444, dry mass 1 kg, heating value, net 34.7 MJ, wet mass 1 kg
- waste paperboard, sorted: 0.0984 kg; lognormal variance with pedigree 0.0034, pedigree (1,3,2,5,1)
  Reported as Mixed Grades (10.4 kg/t); Corrugated and Kraft. pre- consumer (33.8 kg/t); Corrugated and Kraft. post- consumer (53.2 kg/t); Other grades (0.4 kg/t);
  properties: carbon content, non-fossil 0.46, dry mass 0.88 kg, heating value, net 15.92 MJ, water content 0.136364, wet mass 1 kg
- wood chips, dry, measured as dry mass: 0.218235 kg; lognormal variance with pedigree 0.012, pedigree (2,3,2,5,3)
  FEFCO 2018. Reported as sawmill residues, hardwood and biofuels: Sawmill residues are reported in tonne bone dry weight (70 kg), biofuels are reported as bark, scrap wood and tall oil in 2.016 GJ/tonne product. A LHV of 13.6 MJ/kg was assumed.
  properties: carbon content, non-fossil 0.494, dry mass 1 kg, heating value, net 9.99 MJ, water content 0.4, wet mass 1.4 kg

## Inputs from nature
- Oxygen [natural resource, in air]: 0.723825 kg; name O2; = (CO2_fossil+CO2_non_fossil)/(16*2+12) * (16*2) + (CO_fossil+CO_non_fossil)/(16+12) *16; lognormal variance with pedigree 0.0514, pedigree (2,5,2,5,4)
  Oxygen is required for the combustion process. Calculated value
  property carbon content, fossil 0; name O2_C_content_fossil
  property carbon content, non-fossil 0; name O2_C_content_non_fossil
- Water, river [natural resource, in water]: 0.03681 m3; lognormal variance with pedigree 0.0034, pedigree (1,3,2,5,1)
  FEFCO 2018. Reported as surface water

## Emissions to nature
- Acetaldehyde [air, unspecified]: 2.51193e-7 kg; lognormal variance with pedigree 0.0528, pedigree (3,3,2,5,3)
  Estimation based on fuel input data and emission factors from corresponding ecoinvent fuel combustion datasets (see "Extrapolations" comment). The internal fuels mainly consist of the black liquor and bark from the wood input for pulp production. Internal fuels are represented by the calculated emissions but do not have the corresponding fuel input from technosphere, because they are supplied from within the system boundaries. The amounts of internal fuels used in the process are: Black liquor (4.85 GJ/t), Bark (1.6 GJ/t), Wood (0.04 GJ/t), Biogas (0.05 GJ/t). No proxy was available for the combustion of black liquor. Emissions from these internal energy generation processes are therefore only reflected in the key emission factors provided by the industry, other emissions constitute a data gap.
  Uncertainty: estimation - based on respective heating modules (ecoinvent). Uncertainty accounts for the fact that some proxies for inexisting fuel combustion datasets were used (e.g. natural gas combustion emission factors for LPG, diesel for light fuel oil, lignite for peat).
- Acetic acid [air, unspecified]: 1.32565e-7 kg; lognormal variance with pedigree 0.0528, pedigree (3,3,2,5,3)
  Estimation based on fuel input data and emission factors from corresponding ecoinvent fuel combustion datasets (see "Extrapolations" comment). The internal fuels mainly consist of the black liquor and bark from the wood input for pulp production. Internal fuels are represented by the calculated emissions but do not have the corresponding fuel input from technosphere, because they are supplied from within the system boundaries. The amounts of internal fuels used in the process are: Black liquor (4.85 GJ/t), Bark (1.6 GJ/t), Wood (0.04 GJ/t), Biogas (0.05 GJ/t). No proxy was available for the combustion of black liquor. Emissions from these internal energy generation processes are therefore only reflected in the key emission factors provided by the industry, other emissions constitute a data gap.
  Uncertainty: This emission was calculated from the ecoinvent emission factor of combustion of energy. Some energy sources do not have emission factor (LPG, peat and diesel) so other factors were used ( natural gas, lignite and light fuel oil).
- Acetone [air, unspecified]: 2.80412e-8 kg; lognormal variance with pedigree 0.0528, pedigree (3,3,2,5,3)
  (same comment as for Acetaldehyde)
- Aluminium III [air, unspecified]: 3.29426e-5 kg; lognormal variance with pedigree 0.6628, pedigree (3,3,2,5,3)
  (same comment as for Acetaldehyde)
- Ammonia [air, unspecified]: 6.33097e-6 kg; lognormal variance with pedigree 0.0528, pedigree (3,3,2,5,3)
  Estimation based on fuel input data and emission factors from corresponding ecoinvent fuel combustion datasets (see "Extrapolations" comment). The internal fuels mainly consist of the black liquor and bark from the wood input for pulp production. Internal fuels are represented by the calculated emissions but do not have the corresponding fuel input from technosphere, because they are supplied from within the system boundaries. The amounts of internal fuels used in the process are: Black liquor (4.85 GJ/t), Bark (1.6 GJ/t), Wood (0.04 GJ/t), Biogas (0.05 GJ/t). No proxy was available for the combustion of black liquor. Emissions from these internal energy generation processes are therefore only reflected in the key emission factors provided by the industry, other emissions constitute a data gap.
- Antimony ion [air, unspecified]: 6.20734e-8 kg; lognormal variance with pedigree 0.4128, pedigree (3,3,2,5,3)
  (same comment as for Acetaldehyde)
- Arsenic ion [air, unspecified]: 1.3832e-7 kg; lognormal variance with pedigree 0.0528, pedigree (3,3,2,5,3)
  (same comment as for Ammonia)
- Barium II [air, unspecified]: 6.62194e-7 kg; lognormal variance with pedigree 0.0528, pedigree (3,3,2,5,3)
  (same comment as for Acetaldehyde)
- Benzene [air, unspecified]: 1.57199e-5 kg; lognormal variance with pedigree 0.0528, pedigree (3,3,2,5,3)
  (same comment as for Acetaldehyde)
- Benzene, ethyl- [air, urban air close to ground]: 1.0968e-7 kg; lognormal variance with pedigree 0.0528, pedigree (3,3,2,5,3)
  (same comment as for Ammonia)
- Benzene, hexachloro- [air, urban air close to ground]: 2.63232e-14 kg; lognormal variance with pedigree 0.0528, pedigree (3,3,2,5,3)
  (same comment as for Ammonia)
- Benzo(a)pyrene [air, unspecified]: 5.04391e-8 kg; lognormal variance with pedigree 0.0528, pedigree (3,3,2,5,3)
  (same comment as for Acetaldehyde)
- Beryllium II [air, unspecified]: 6.62194e-9 kg; lognormal variance with pedigree 0.0528, pedigree (3,3,2,5,3)
  (same comment as for Acetaldehyde)
- Boron [air, unspecified]: 2.78803e-5 kg; lognormal variance with pedigree 0.6628, pedigree (3,3,2,5,3)
  (same comment as for Acetaldehyde)
- Bromine [air, unspecified]: 2.59863e-7 kg; lognormal variance with pedigree 0.0528, pedigree (3,3,2,5,3)
  (same comment as for Acetaldehyde)
- Butane [air, unspecified]: 1.04062e-7 kg; lognormal variance with pedigree 0.0528, pedigree (3,3,2,5,3)
  (same comment as for Acetaldehyde)
- Cadmium II [air, unspecified]: 2.18889e-8 kg; lognormal variance with pedigree 0.6628, pedigree (3,3,2,5,3)
  (same comment as for Ammonia)
- Calcium [air, unspecified]: 0.000144597 kg; lognormal variance with pedigree 0.0528, pedigree (3,3,2,5,3)
  (same comment as for Acetaldehyde)
- Carbon dioxide, fossil [air, unspecified]: 0.281923 kg; name CO2_fossil; lognormal variance with pedigree 0.0514, pedigree (2,5,2,5,4)
  This value represents a calculated value, i.e., it is not based onFEFCO (2018) data. It was calculated based on the fossil fuel input data and emission factors from corresponding ecoinvent fuel combustion datasets (see "Extrapolations" comment).
- Carbon dioxide, non-fossil [air, unspecified]: 0.71161 kg; name CO2_non_fossil; lognormal variance with pedigree 0.0034, pedigree (1,3,2,5,1)
  FEFCO 2018
- Carbon monoxide, fossil [air, unspecified]: 0.0011 kg; name CO_fossil; lognormal variance with pedigree 0.6528, pedigree (1,3,2,5,1)
  FEFCO 2018. Reported as CO. Assumed to be Carbon monoxide, fossil
- Carbon monoxide, non-fossil [air, urban air close to ground]: 0.00109691 kg; name CO_non_fossil; lognormal variance with pedigree 0.6628, pedigree (3,3,2,5,3)
  (same comment as for Ammonia)
- Chlorine [air, urban air close to ground]: 6.5808e-7 kg; lognormal variance with pedigree 0.0528, pedigree (3,3,2,5,3)
  (same comment as for Ammonia)
- Chromium III [air, unspecified]: 1.94211e-7 kg; lognormal variance with pedigree 0.6628, pedigree (3,3,2,5,3)
  (same comment as for Ammonia)
- Chromium VI [air, unspecified]: 2.92193e-9 kg; lognormal variance with pedigree 0.6628, pedigree (3,3,2,5,3)
  (same comment as for Acetaldehyde)
- Cobalt II [air, unspecified]: 9.94549e-8 kg; lognormal variance with pedigree 0.6628, pedigree (3,3,2,5,3)
  (same comment as for Acetaldehyde)
- Copper ion [air, unspecified]: 1.73757e-7 kg; lognormal variance with pedigree 0.6628, pedigree (3,3,2,5,3)
  (same comment as for Ammonia)
- Dinitrogen monoxide [air, unspecified]: 1.01801e-5 kg; lognormal variance with pedigree 0.0528, pedigree (3,3,2,5,3)
  (same comment as for Ammonia)
- Dioxins, measured as 2,3,7,8-tetrachlorodibenzo-p-dioxin [air, unspecified]: 1.25821e-13 kg; lognormal variance with pedigree 0.0528, pedigree (3,3,2,5,3)
  (same comment as for Ammonia)
- Ethane [air, unspecified]: 3.70143e-5 kg; lognormal variance with pedigree 0.0528, pedigree (3,3,2,5,3)
  (same comment as for Ammonia)
- Ethanol [air, unspecified]: 5.60824e-8 kg; lognormal variance with pedigree 0.0528, pedigree (3,3,2,5,3)
  (same comment as for Ammonia)
- Ethylene [air, unspecified]: 7.40287e-5 kg; lognormal variance with pedigree 0.0508, pedigree (3,3,2,1,3)
  (same comment as for Ammonia)
- Ethyne [air, unspecified]: 1.23381e-5 kg; lognormal variance with pedigree 0.0528, pedigree (3,3,2,5,3)
  (same comment as for Ammonia)
- Fluorine [air, urban air close to ground]: 1.828e-7 kg; lognormal variance with pedigree 0.0528, pedigree (3,3,2,5,3)
  (same comment as for Ammonia)
- Formaldehyde [air, unspecified]: 8.71421e-7 kg; lognormal variance with pedigree 0.0528, pedigree (3,3,2,5,3)
  (same comment as for Ammonia)
- Hydrocarbons, aliphatic, alkanes, unspecified [air, unspecified]: 1.57907e-5 kg; lognormal variance with pedigree 0.0528, pedigree (3,3,2,5,3)
  (same comment as for Acetaldehyde)
- Hydrocarbons, aliphatic, unsaturated [air, unspecified]: 2.36773e-5 kg; lognormal variance with pedigree 0.0528, pedigree (3,3,2,5,3)
  (same comment as for Acetaldehyde)
- Hydrocarbons, aromatic [air, unspecified]: 2.88852e-8 kg; lognormal variance with pedigree 0.0528, pedigree (3,3,2,5,3)
  (same comment as for Acetaldehyde)
- Hydrochloric acid [air, unspecified]: 2.35522e-5 kg; lognormal variance with pedigree 0.0508, pedigree (3,3,2,1,3)
  (same comment as for Acetaldehyde)
- Hydrogen fluoride [air, unspecified]: 7.84587e-7 kg; lognormal variance with pedigree 0.0528, pedigree (3,3,2,5,3)
  (same comment as for Acetaldehyde)
- Hydrogen sulfide [air, unspecified]: 5.84906e-5 kg; = 0.055/(32.065/34.1); lognormal variance with pedigree 0.0428, pedigree (1,3,2,5,1)
  FEFCO 2018. Reported as S (0.055 kg). Converted stoichiometrically to H2S.
- Iodine [air, unspecified]: 1.14854e-7 kg; lognormal variance with pedigree 0.0528, pedigree (3,3,2,5,3)
  (same comment as for Acetaldehyde)
- Iron ion [air, unspecified]: 3.48642e-5 kg; lognormal variance with pedigree 0.6628, pedigree (3,3,2,5,3)
  (same comment as for Acetaldehyde)
- Lead II [air, unspecified]: 2.39121e-7 kg; lognormal variance with pedigree 0.6628, pedigree (3,3,2,5,3)
  (same comment as for Ammonia)
- Lead-210 [air, unspecified]: 0.000168154 kBq; lognormal variance with pedigree 0.3128, pedigree (3,3,2,5,3)
  (same comment as for Acetaldehyde)
- Magnesium [air, unspecified]: 2.11614e-5 kg; lognormal variance with pedigree 0.6628, pedigree (3,3,2,5,3)
  (same comment as for Acetaldehyde)
- Manganese II [air, unspecified]: 6.91314e-7 kg; lognormal variance with pedigree 0.6628, pedigree (3,3,2,5,3)
  (same comment as for Acetaldehyde)
- Mercury II [air, unspecified]: 2.99135e-8 kg; lognormal variance with pedigree 0.6628, pedigree (3,3,2,5,3)
  (same comment as for Acetaldehyde)
- Methane, fossil [air, unspecified]: 0.000733523 kg; lognormal variance with pedigree 0.0528, pedigree (3,3,2,5,3)
  (same comment as for Acetaldehyde)
- Methane, non-fossil [air, unspecified]: 1.1068e-5 kg; lognormal variance with pedigree 0.0528, pedigree (3,3,2,5,3)
  (same comment as for Ammonia)
- Methanol [air, unspecified]: 9.53402e-8 kg; lognormal variance with pedigree 0.0528, pedigree (3,3,2,5,3)
  (same comment as for Acetaldehyde)
- Molybdenum VI [air, unspecified]: 1.10685e-7 kg; lognormal variance with pedigree 0.6628, pedigree (3,3,2,5,3)
  (same comment as for Acetaldehyde)
- NMVOC, non-methane volatile organic compounds [air, unspecified]: 6.85211e-5 kg; lognormal variance with pedigree 0.0528, pedigree (3,3,2,5,3)
  (same comment as for Ammonia)
- Nickel II [air, unspecified]: 2.58953e-7 kg; lognormal variance with pedigree 0.6628, pedigree (3,3,2,5,3)
  (same comment as for Ammonia)
- Nitrogen oxides [air, unspecified]: 0.00137 kg; lognormal variance with pedigree 0.0428, pedigree (1,3,2,5,1)
  FEFCO 2018. Reported as NOx (as NO2)
- PAH, polycyclic aromatic hydrocarbons [air, unspecified]: 4.20663e-8 kg; lognormal variance with pedigree 0.3128, pedigree (3,3,2,5,3)
  (same comment as for Ammonia)
- Particulate Matter, < 2.5 um [air, unspecified]: 0.000222245 kg; lognormal variance with pedigree 0.3128, pedigree (3,3,2,5,3)
  (same comment as for Acetaldehyde)
- Particulate Matter, > 10 um [air, unspecified]: 0.000163 kg; lognormal variance with pedigree 0.0528, pedigree (3,3,2,5,3)
  FEFCO 2018. Reported as dust.
  Uncertainty: This emission was calculated from the ecoinvent emission factor of combustion of energy. Some energy sources do not have emission factor (LPG, peat and diesel) so other factors were used ( natural gas, lignite and light fuel oil).
- Particulate Matter, > 2.5 um and < 10um [air, unspecified]: 0.000114089 kg; lognormal variance with pedigree 0.1328, pedigree (3,3,2,5,3)
  (same comment as for Acetaldehyde)
- Pentane [air, unspecified]: 1.69108e-7 kg; lognormal variance with pedigree 0.0528, pedigree (3,3,2,5,3)
  (same comment as for Acetaldehyde)
- Phenol [air, unspecified]: 1.215e-6 kg; lognormal variance with pedigree 0.0528, pedigree (3,3,2,5,3)
  (same comment as for Acetaldehyde)
- Phenol, pentachloro- [air, urban air close to ground]: 2.96136e-11 kg; lognormal variance with pedigree 0.0528, pedigree (3,3,2,5,3)
  (same comment as for Ammonia)
- Phosphorus [air, unspecified]: 1.36601e-6 kg; lognormal variance with pedigree 0.0528, pedigree (3,3,2,5,3)
  (same comment as for Acetaldehyde)
- Polonium-210 [air, unspecified]: 0.000308999 kBq; lognormal variance with pedigree 0.3128, pedigree (3,3,2,5,3)
  (same comment as for Acetaldehyde)
- Potassium I [air, unspecified]: 8.9718e-5 kg; lognormal variance with pedigree 0.6628, pedigree (3,3,2,5,3)
  (same comment as for Acetaldehyde)
- Potassium-40 [air, unspecified]: 4.566e-5 kBq; lognormal variance with pedigree 0.3128, pedigree (3,3,2,5,3)
  (same comment as for Acetaldehyde)
- Propane [air, unspecified]: 2.47096e-5 kg; lognormal variance with pedigree 0.0528, pedigree (3,3,2,5,3)
  (same comment as for Acetaldehyde)
- Propene [air, unspecified]: 1.23381e-5 kg; lognormal variance with pedigree 0.0528, pedigree (3,3,2,5,3)
  (same comment as for Acetaldehyde)
- Propionic acid [air, unspecified]: 2.72e-9 kg; lognormal variance with pedigree 0.0528, pedigree (3,3,2,5,3)
  (same comment as for Acetaldehyde)
- Radium-226 [air, unspecified]: 4.33947e-5 kBq; lognormal variance with pedigree 0.3128, pedigree (3,3,2,5,3)
  (same comment as for Acetaldehyde)
- Radium-228 [air, unspecified]: 4.53525e-5 kBq; lognormal variance with pedigree 0.3128, pedigree (3,3,2,5,3)
  (same comment as for Acetaldehyde)
- Radon-220 [air, unspecified]: 1.00962e-5 kBq; lognormal variance with pedigree 0.3128, pedigree (3,3,2,5,3)
  (same comment as for Acetaldehyde)
- Radon-222 [air, unspecified]: 1.00962e-5 kBq; lognormal variance with pedigree 0.3128, pedigree (3,3,2,5,3)
  (same comment as for Acetaldehyde)
- Scandium [air, unspecified]: 2.0098e-9 kg; lognormal variance with pedigree 0.0528, pedigree (3,3,2,5,3)
  (same comment as for Acetaldehyde)
- Selenium IV [air, unspecified]: 1.90004e-7 kg; lognormal variance with pedigree 0.0528, pedigree (3,3,2,5,3)
  (same comment as for Acetaldehyde)
- Silicon [air, unspecified]: 0.000299974 kg; lognormal variance with pedigree 0.0528, pedigree (3,3,2,5,3)
  (same comment as for Acetaldehyde)
- Sodium [air, unspecified]: 1.06469e-5 kg; lognormal variance with pedigree 0.0528, pedigree (3,3,2,5,3)
  (same comment as for Acetaldehyde)
- Strontium [air, unspecified]: 7.15432e-7 kg; lognormal variance with pedigree 0.0528, pedigree (3,3,2,5,3)
  (same comment as for Acetaldehyde)
- Sulfur dioxide [air, unspecified]: 0.000515299 kg; lognormal variance with pedigree 0.0134, pedigree (3,3,2,5,3)
  (same comment as for Ammonia)
- Sulfur oxides [air, unspecified]: 0.000566 kg; lognormal variance with pedigree 0.0034, pedigree (1,3,2,5,1)
  FEFCO 2018. Reported as SOx (as SO2)
- Thallium I [air, unspecified]: 9.00612e-10 kg; lognormal variance with pedigree 0.0528, pedigree (3,3,2,5,3)
  (same comment as for Acetaldehyde)
- Thorium [air, unspecified]: 8.07772e-9 kg; lognormal variance with pedigree 0.0528, pedigree (3,3,2,5,3)
  (same comment as for Acetaldehyde)
- Thorium-228 [air, unspecified]: 2.00512e-5 kBq; lognormal variance with pedigree 0.3128, pedigree (3,3,2,5,3)
  (same comment as for Acetaldehyde)
- Thorium-232 [air, unspecified]: 1.24948e-5 kBq; lognormal variance with pedigree 0.3128, pedigree (3,3,2,5,3)
  (same comment as for Acetaldehyde)
- Tin ion [air, unspecified]: 5.14637e-9 kg; lognormal variance with pedigree 0.6628, pedigree (3,3,2,5,3)
  (same comment as for Acetaldehyde)
- Titanium ion [air, unspecified]: 7.57378e-7 kg; lognormal variance with pedigree 0.6628, pedigree (3,3,2,5,3)
  (same comment as for Acetaldehyde)
- Toluene [air, unspecified]: 3.59807e-6 kg; lognormal variance with pedigree 0.0528, pedigree (3,3,2,5,3)
  (same comment as for Acetaldehyde)
- Uranium [air, unspecified]: 1.32233e-8 kg; lognormal variance with pedigree 0.0528, pedigree (3,3,2,5,3)
  (same comment as for Acetaldehyde)
- Uranium-238 [air, unspecified]: 3.63242e-5 kBq; lognormal variance with pedigree 0.3128, pedigree (3,3,2,5,3)
  (same comment as for Acetaldehyde)
- Vanadium V [air, unspecified]: 5.2439e-7 kg; lognormal variance with pedigree 0.0528, pedigree (3,3,2,5,3)
  (same comment as for Acetaldehyde)
- Water [air, unspecified]: 0.00645 m3; lognormal variance with pedigree 0.0922, pedigree (4,4,2,5,4)
  FEFCO 2018. Reported as water input-output
- Xylene [air, unspecified]: 8.05662e-6 kg; lognormal variance with pedigree 0.0528, pedigree (3,3,2,5,3)
  (same comment as for Acetaldehyde)
- Zinc II [air, unspecified]: 1.15251e-6 kg; lognormal variance with pedigree 0.6628, pedigree (3,3,2,5,3)
  (same comment as for Acetaldehyde)
- m-Xylene [air, urban air close to ground]: 4.3872e-7 kg; lognormal variance with pedigree 0.0528, pedigree (3,3,2,5,3)
  (same comment as for Ammonia)
- BOD5, Biological Oxygen Demand [water, unspecified]: 0.000245 kg; lognormal variance with pedigree 0.0428, pedigree (1,3,2,5,1)
  FEFCO 2018.
- COD, Chemical Oxygen Demand [water, unspecified]: 0.00505 kg; lognormal variance with pedigree 0.0428, pedigree (1,3,2,5,1)
  FEFCO 2018.
- DOC, Dissolved Organic Carbon [water, unspecified]: 0.00214 kg; lognormal variance with pedigree 0.0448, pedigree (3,3,2,5,1)
  No data available for DOC. DOC=TOC as proposed by ecoinvent Data Quality Guidelines.
- Nitrogen [water, unspecified]: 0.000554 kg; lognormal variance with pedigree 0.0428, pedigree (1,3,2,5,1)
  FEFCO 2018. Reported as total nitrogen.
- Phosphorus [water, unspecified]: 8e-6 kg; lognormal variance with pedigree 0.0428, pedigree (1,3,2,5,1)
  FEFCO 2018.
- Suspended solids, unspecified [water, unspecified]: 0.000312 kg; lognormal variance with pedigree 0.0428, pedigree (1,3,2,5,1)
  FEFCO 2018.
- TOC, Total Organic Carbon [water, unspecified]: 0.00214 kg; lognormal variance with pedigree 0.0428, pedigree (1,3,2,5,1)
  FEFCO 2018.
- Water [water, unspecified]: 0.03036 m3; lognormal variance with pedigree 0.0114, pedigree (1,3,2,5,3)
  FEFCO 2018. Accounts for both "thermally polluted" (14.48 m3) and "process water after treatment" (15.88 m3) water output

## Sampling procedure
This dataset has been extrapolated from respective regional geographies (RER). Data were collected from the producers by Cepi ContainerBoard and FEFCO (European Federation of Corrugated Board Manufacturers) for the European Database for Corrugated Board Life Cycle Studies), checked by technical experts and reviewed by the Institut für Energie- und Umweltforschung Heidelberg (ifeu). The data for Semichemical Fluting and Kraftliner jointly represent ca. 85% of the total annual production of corrugated base papers from primary fibres in Europe. The data for Semichemical Fluting and Kraftliner also jointly represent ca. 90% of the total consumption of these grades for corrugated board production in Europe. Reference(s): FEFCO. 2018. European Database for Corrugated Board Life Cycle Studies 2018. Reference(s): https://www.fefco.org/sites/default/files/documents/LCA%20Report%202019_revised_%20p%2037.pdf, accessed September 2022.

## Extrapolations
This dataset has been extrapolated from respective regional geographies (RER). Additional air emissions from the combustion of fossil fuels estimated based on industrial heating datasets from the ecoinvent database: natural gas: heat production, natural gas, at industrial furnace >100kW, Europe without Switzerland; biogas: heat production, natural gas, at industrial furnace >100kW, Europe without Switzerland; heavy fuel oil: heat production, heavy fuel oil, at industrial furnace 1MW, Europe without Switzerland; light fuel oil: heat production, light fuel oil, at industrial furnace 1MW, Europe without Switzerland; diesel: heat production, light fuel oil, at industrial furnace 1MW, Europe without Switzerland; Coal: heat production, at hard coal industrial furnace 1-10MW, Europe without Switzerland; Peat: heat production, lignite briquette, at stove 5-15kW, Europe without Switzerland; Biofuel (bark, scrap wood, wood, tall oil): heat production, wood chips from industry, at furnace 1000kW, CH. CO2, CO and CH4 emissions from biogas were modelled as non-fossil.
