# adipic acid production

Dataset: EcoSpold 2, unit process
Geography: RER
Time period: 1997-01-01 to 2022-12-31
Technology level: current
Classification: ISIC rev.4 ecoinvent: 2011:Manufacture of basic chemicals
Synonyms: Adilactetten; Acifloctin; Acinetten; Hexanedioic acid; 124-04-9
Scenario: Business-as-Usual
System model: Substitution, consequential, long-term
Generated by: Hans-Jörg Althaus
Published in: Althaus H.-J. 2007
Database: ecoinvent
isCopyrightProtected: true

## General comment
This dataset represents the production of 1 kg of adipic acid. Adipic acid is isolated as colourless, odourless crystals having an acidic taste. It is very soluble in methanol and ethanol, soluble in water and acetone, and very slightly soluble in cyclohexane and benzene. Adipic acid crystallises as monoclinic prisms from water, ethyl acetate, or acetone - petroleum ether. Solubility in water increases rapidly with temperature.
Adipic acid is the most commercially significant aliphatic dicarboxylic acid. Appearing in nature in only minor amounts, it is synthesised on a very large scale world-wide. Adipic acid is an organic compound used for the production of nylon 66 polyamide, which is widely used for the production of synthetic textiles and plastics.
This dataset is based on estimations using industrial data. It models the production of adipic acid by the nitric acid oxidation of a mixture of cyclohexanone – cyclohexanol (KA mixture) which is produced by the oxidation of cyclohexane. More than 80% of the total production is through this process. Only the most important flows are taken into account. The energy and water demands are approximated based on data from a large chemical factory (Gendorf 2016).
Succinic and glutaric acid are produced as by-products (5.7%).
References:
Althaus H.-J., Chudacoff M., Hischier R., Jungbluth N., Osses M. and Primas A. (2007) Life Cycle Inventories of Chemicals. ecoinvent report No. 8, v2.0. EMPA Dübendorf, Swiss Centre for Life Cycle Inventories, Dübendorf, CH.
Gendorf (2016) Umwelterklärung 2015, Werk Gendorf Industriepark, www.gendorf.de.

## Included activities start
The activity starts when the raw materials enter the process.

## Included activities end
This activity ends with the production of adipic acid, including refining (to 99%).

## Geography
The data used has no specific geographical origin as it is based on stoechiometric calculations and estimations. It is assumed to be representative of the production processes in this geography. Some values are based on data from a large chemical factory located in Germany. These are assumed to be valid for this geography.

## Technology
This dataset models the production of adipic acid by nitric acid oxidation of a mixture of cyclohexanol and cyclohexanone, which is obtained by oxidation of cyclohexane. Abatement of N2O emissions is assumed to reduce the emissions by 95% through regenerative thermal oxidation.
Essentially all production of adipic acid is derived from the nitric acid oxidation of a mixture of cyclohexanone – cyclohexanol (KA mixture). The reactor, controlled at 60 – 80 °C and 0.1 – 0.4 MPa, is charged with the recycled nitric acid stream, the KA feed material, and makeup acid containing 50 – 60 % nitric acid and copper – vanadium catalyst. The reaction is very exothermic (6.280 MJ/kg). Adipic acid is obtained with a yield greater than 90%. Nitrogen oxides, carbon dioxide, and some lower dicarboxylic acids are the major by-products, as well as oxidation products arising from impurities in the KA intermediate. Succinic and glutaric acid are accounted for as by-products in this dataset (5.7%).
The nitric acid oxidation step produces three major waste streams: an off-gas containing oxides of nitrogen and CO2, water containing traces of nitric acid and organics from the water removal column; and a dibasic acid purge stream containing adipic, glutaric and succinic acids. The production of adipic acid can be represented by the following simplified reaction formula:
0.733 C6H12O + 0.367 C6H10O + 2 HNO3 -> C6H10O4 + N2O + 2 H2O + 7.23 H2
References:
Althaus H.-J., Chudacoff M., Hischier R., Jungbluth N., Osses M. and Primas A. (2007) Life Cycle Inventories of Chemicals. ecoinvent report No. 8, v2.0. EMPA Dübendorf, Swiss Centre for Life Cycle Inventories, Dübendorf, CH.

## Time period
The data in this dataset come from different years, but overall form the most realistic picture of the production. Some values are based on data published by the Gendorf factory that were collected between 2011 and 2015. The time period has been adjusted accordingly. For more details, see the comments of the exchanges.

## Reference product
- adipic acid: 1 kg; name RP; By-product classification allocatable product; CPC 34140: Carboxylic acids and their anhydrides, halides, peroxides and peroxyacids and their halogenated, sulphonated, […]; CAS 124-04-9
  Adipic acid is the most commercially significant aliphatic dicarboxylic acid. Appearing in nature in only minor amounts, it is synthesised on a very large scale world-wide. Adipic acid is an organic compound used for the production of nylon 66 polyamide, which is widely used for the production of synthetic textiles and plastics.
  References:
  Althaus H.-J., Chudacoff M., Hischier R., Jungbluth N., Osses M. and Primas A. (2007) Life Cycle Inventories of Chemicals. ecoinvent report No. 8, v2.0. EMPA Dübendorf, Swiss Centre for Life Cycle Inventories, Dübendorf, CH.
  production volume 6.786e8 kg
    Estimated value. The European production volume is estimated based on information from Cefic (European Chemical Industry Council) and the American Chemistry Council.
    According to Cefic (2016) the Global sales of chemicals in the year 2015 was 3 534 billion euros. The reported share of sales per regions are: EU28 14.7%; Other Europe (Switzerland, Norway, Turkey, Russia and Ukraine) 2.7%; NAFTA (US, Canada and Mexico) 16.5%; Latin America 3.8%; China 39.9%; Japan 3.9%; Republic of Korea 3.2%; India 2.2%; Rest of Asia 11.9%; Rest of the World 1.3%, Switzerland 1%. Cefic also reports the US total sales, 518.7 billion euros of the global 3 534 billion euros (14.7%). The same share is reported from the American Chemistry Council (2016), according to this source the USA sales account for 15% of global sales for the year 2016.
    According to statista, the global annual production volume 2018 of adipic acid is 3.9 Million tonnes. Since no data were found for the European production this value was scaled accordingly.
    Reference(s):
    Cefic 2016. Facts and figures 2016 of the European chemical industry. Accessible at: http://www.cefic.org/Facts-and-Figures/Chemicals-Industry-Profile/
    American Chemistry Council 2016. Outlook: U.S. Chemical Industry Continues to Outpace Industrial Output; Accounts for More Than One-Half of Construction Spending by Manufacturing Sector. Accessible at: https://www.americanchemistry.com/Media/PressReleasesTranscripts/ACC-news-releases/US-Chemical-Industry-Continues-to-Outpace-Industrial-Output.html
    Statista: Market volume of adipic acid worldwide in 2018 and 2023, available here: https://www.statista.com/statistics/1113587/global-market-size-adipic-acid/, last accessed 2022-08-24.
  property heating value, net 23.23 MJ
    LHV is calculated based on the elemental composition of the substance. Based on the CAS number of the substance (000124-04-9), the chemical formula of the substance is found to be: C6H10O4, (PubChem 2020).
    Reference: Kim, S., Chen, J., Cheng, T., Gindulyte, A., He, J., He, S., Li, Q., Shoemaker, B. A., Thiessen, P. A., Yu, B., Zaslavsky, L., Zhang, J., & Bolton, E. E. (2019). PubChem 2019 update: improved access to chemical data. Nucleic acids research, 47(D1), D1102–D1109. https://doi.org/10.1093/nar/gky1033
  property price 1.08 EUR2005
    Calculated value based on data from United Nations Commodity Trade Statistics Database (comtrade.un.org). UN comtrade category: 291712 Adipic acid, its salts & esters. Year 2005. Using exchange rate of 1EURO = 1.209 USD. Average of price of import into 5 main markets (EU, US, JP, IN and CN).
  properties: carbon allocation 0.493151 kg, carbon content 0.493151, carbon content, fossil 0.493151, carbon content, non-fossil 0, dry mass 1 kg, water content 0, water in wet mass 0 kg, wet mass 1 kg

## Inputs from technosphere
- N2O retained, by regenerative thermal oxidation: 0.28595 kg; = 0.301*0.95; lognormal variance with pedigree 0.0175, pedigree (2,5,2,3,3)
  301 g of nitrous oxide is produced per kg adipic acid produced (Althaus 2007) (300 gN2O/kg according to IPCC (2000)). In this dataset, it is assumed that 95% of the N2O produced in the reaction is destroyed by thermal oxidation, while the remaining nitrous oxide (0.01505 g/kg adipic acid) is emitted to air.
  Reference:
  Althaus H.-J., Chudacoff M., Hischier R., Jungbluth N., Osses M. and Primas A. (2007) Life Cycle Inventories of Chemicals. ecoinvent report No. 8, v2.0. EMPA Dübendorf, Swiss Centre for Life Cycle Inventories, Dübendorf, CH.
  IPCC (2000) Good Practice Guidance and Uncertainty Management in National Greenhouse Gas Inventories, Chapter 3 Industrial Processes, http://www.ipcc-nggip.iges.or.jp/public/gp/english/3_Industry.pdf.
- chemical factory, organics: 4e-10 unit; lognormal variance with pedigree 0.309425, pedigree (2,3,2,2,3)
  Calculated based on literature data published by the industry. For this activity, no information was readily available concerning infrastructure and land-use. Therefore, the infrastructure is estimated based on data from two chemical factories, the BASF site of Ludwigshafen and the chemical factory in Gendorf (which are both located in Germany), which produce a wide range of chemical substances. Based on this data, the following assumptions are made: the built area amounts to about 4.2 ha, the plant has an average output of 50'000 t/a and a lifespan of fifty years. The estimated infrastructure amount is therefore 4.00 E-10 units per kg of produced chemical.
  References:
  Althaus H.-J., Chudacoff M., Hischier R., Jungbluth N., Osses M. and Primas A. (2007) Life Cycle Inventories of Chemicals. ecoinvent report No. 8, v2.0. EMPA Dübendorf, Swiss Centre for Life Cycle Inventories, Dübendorf, CH.
  Gendorf (2000) Umwelterklärung 2000, Werk Gendorf. Werk Gendorf, Burgkirchen.
- cyclohexane: 0.73 kg; lognormal variance with pedigree 0.1786, pedigree (4,5,5,5,5)
  Estimated value based on expert judgement.
  properties: carbon content, fossil 0.857143, dry mass 1 kg, heating value, net 43.22 MJ, wet mass 1 kg
- electricity, medium voltage: 0.13 kWh; lognormal variance with pedigree 0.1786, pedigree (4,5,5,5,5)
  Estimated value based on expert judgement.
- heat, district or industrial, natural gas: 23.788 MJ; lognormal variance with pedigree 0.0381, pedigree (4,5,3,3,1)
  The heat of reaction (6.280 MJ/kg) is more than high enough to provide the energy to heat the inputs to the reaction temperature. Distillation however needs a lot of thermal energy. See more in Althaus H.-J., Chudacoff M., Hischier R., Jungbluth N., Osses M. and Primas A. (2007) Life Cycle Inventories of Chemicals. ecoinvent report No. 8, v2.0. EMPA Dübendorf, Swiss Centre for Life Cycle Inventories, Dübendorf, CH.
  properties: heating value, net 1 MJ
- heat, district or industrial, other than natural gas: 13.2775 MJ; lognormal variance with pedigree 0.0381, pedigree (4,5,3,3,1)
  (same comment as for heat, district or industrial, natural gas)
  properties: heating value, net 1 MJ
- nitric acid, without water, in 50% solution state: 0.36 kg; lognormal variance with pedigree 0.086125, pedigree (4,2,5,2,3)
  Estimated value based on expert judgement.
  properties: dry mass 1 kg, wet mass 1 kg
- oxygen, liquid: 0.103948 kg; lognormal variance with pedigree 0.012, pedigree (2,4,2,4,3)
  Calculated stoichometric input from nitrous oxide abatement.
  properties: dry mass 1 kg, wet mass 1 kg
- sodium hydroxide, without water, in 50% solution state: 0.05 kg; lognormal variance with pedigree 0.1786, pedigree (4,5,5,5,5)
  Estimated value based on expert judgement.
  properties: dry mass 1 kg, heating value, net 3.03 MJ, wet mass 1 kg
- succinic acid: -0.0570825 kg; name BP; lognormal variance with pedigree 0.0113, pedigree (2,4,1,3,3)
  Amount based on Smith, J. R. L., Richards, D. I., Thomas, C. B., & Whittaker, M. (1992). The formation of glutaric and succinic acids in the oxidation of cyclohexanol by nitric acid. Journal of the Chemical Society, Perkin Transactions 2, (4), 605.
  This amount proxies succinic acid (0.017 kg) and glutaric acid (0.037 kg).
  production volume
    Calculated from production volume of reference product using the relative outputs.
  properties: heating value, net 18.48 MJ, price 1.57 EUR2005
- sulfuric acid: 0.08 kg; lognormal variance with pedigree 0.1786, pedigree (4,5,5,5,5)
  Estimated value based on expert judgement.
  properties: dry mass 1 kg, wet mass 1 kg
- tap water: 0.026 kg; lognormal variance with pedigree 0.010025, pedigree (2,3,2,2,3)
  Calculated based on literature data published by the industry. This value is a 5-year average of data (2011 - 2015) published by the Gendorf factory (Gendorf, 2016, Umwelterklärung, www.gendorf.de), (Gendorf, 2015, Umwelterklärung, www.gendorf.de), (Gendorf, 2014, Umwelterklärung, www.gendorf.de). The amount of tap water per kg of chemical substance produced is calculated using literature data published by the Gendorf factory based in Germany, which produces a wide range of chemical substances. The factory produced 1657400 tonnes of chemical substances in the year 2015 (Gendorf, 2016, Umwelterklärung, www.gendorf.de) and 740000 tonnes of intermediate products. The amount of tap water consumed in the year 2015 was 55100 tonnes (Gendorf, 2016, Umwelterklärung, www.gendorf.de). The resulting amount of tap water is 0.023 kg/kg of chemical product produced. The 5-year average (2011 - 2015, weighted by production volume) is 0.026 kg/kg.
  properties: carbon content, fossil 0.00178991, dry mass 0.000337476 kg, water content 2962.17, wet mass 1 kg
  note on carbon content, fossil: Bicarbonate content is 2.93 mol/m3. CO2 content is 0.1 mol/m3 (ecoinvent v2.2 report 8, Tab 93.1).
- wastewater, average: -2.63381e-6, -6.61915e-8 m3 (2 suppliers, which the file names only by identifier); sum of these -2.7e-6 m3; lognormal variance with pedigree 0.009825, pedigree (2,3,1,2,3)
  Calculated based on literature data published by the industry. This value is a 5-year average of data (2011 - 2015) published by the Gendorf factory (Gendorf, 2016, Umwelterklärung, www.gendorf.de), (Gendorf, 2015, Umwelterklärung, www.gendorf.de), (Gendorf, 2014, Umwelterklärung, www.gendorf.de). The amount of wastewater (which is later on treated in the municipal WWTP) per kg of chemical substance produced is calculated using literature data published by the Gendorf factory based in Germany, which produces a wide range of chemical substances. The factory produced 1657400 tonnes of chemical substances in the year 2015 (Gendorf, 2016, Umwelterklärung, www.gendorf.de) and 740000 tonnes of intermediate products. The amount of wastewater which is later on treated in the municipal WWTP in the year 2015 was 1200 tonnes (Gendorf, 2016, Umwelterklärung, www.gendorf.de). The resulting amount of wastewater is 2.7E-06 m3/kg of chemical product produced.
  production volume
    Calculated from the production volume of adipic acid in proportion to the respective output amounts.
  properties: carbon content, non-fossil 0.194039, dry mass 0.346837 kg, water content 2882.2, wet mass 1000 kg
  note on carbon content, non-fossil: 0.0673 kg TOC/m3 (Tab A.17, ecoinvent v2.2 report 13_I). TOC was considered as Total Carbon.

## Inputs from nature
- Water, cooling, unspecified natural origin [natural resource, in water]: 0.0164 m3; lognormal variance with pedigree 0.010025, pedigree (2,3,2,2,3)
  Calculated based on literature data published by the industry. This value is a 5-year average of data (2011 - 2015) published by the Gendorf factory (Gendorf, 2016, Umwelterklärung, www.gendorf.de), (Gendorf, 2015, Umwelterklärung, www.gendorf.de), (Gendorf, 2014, Umwelterklärung, www.gendorf.de). The amount of water for cooling extracted per kg of chemical substance produced is calculated using literature data published by the Gendorf factory based in Germany, which produces a wide range of chemical substances. The factory produced 1657400 tonnes of chemical substances in the year 2015 (Gendorf, 2016, Umwelterklärung, www.gendorf.de) and 740000 tonnes of intermediate products. The reported amounts of water extracted as groundwater and surface water (river) are assumed to be used entirely for cooling purposes.
- Water, river [natural resource, in water]: 0.00086 m3; lognormal variance with pedigree 0.010025, pedigree (2,3,2,2,3)
  Calculated based on literature data published by the industry. This value is a 5-year average of data (2011 - 2015) published by the Gendorf factory (Gendorf, 2016, Umwelterklärung, www.gendorf.de), (Gendorf, 2015, Umwelterklärung, www.gendorf.de), (Gendorf, 2014, Umwelterklärung, www.gendorf.de). The amount of groundwater and surface water (river) extracted per kg of chemical substance produced is calculated using literature data published by the Gendorf factory based in Germany, which produces a wide range of chemical substances. The factory produced 1657400 tonnes of chemical substances in the year 2015 (Gendorf, 2016, Umwelterklärung, www.gendorf.de) and 740000 tonnes of intermediate products. The amount of groundwater and surface water (river) extracted in the year 2015 was 19950000 tonnes and 21488100 tonnes respectively (Gendorf, 2016, Umwelterklärung, www.gendorf.de).
- Water, well, in ground [natural resource, in water]: 0.00083 m3; lognormal variance with pedigree 0.010025, pedigree (2,3,2,2,3)
  (same comment as for Water, river)

## Emissions to nature
- Dinitrogen monoxide [air, unspecified]: 0.01505 kg; = 0.301*0.05; lognormal variance with pedigree 0.126125, pedigree (4,2,5,2,3)
  (same comment as for N2O retained, by regenerative thermal oxidation)
- Nitrogen [air, unspecified]: 0.182044 kg; lognormal variance with pedigree 0.0514, pedigree (2,4,2,4,3)
  Calculated stoichiometric emissions from nitrous oxide abatement.
- Oxygen [air, unspecified]: 0.207896 kg; lognormal variance with pedigree 0.0514, pedigree (2,4,2,4,3)
  Calculated stoichiometric emissions from nitrous oxide abatement.
- Water [air, unspecified]: 0.0014 m3; lognormal variance with pedigree 0.010025, pedigree (2,3,2,2,3)
  Calculated to ensure the water balance. In general, in the case of recirculating cooling systems, 77% of the water input evaporates to air. In case of once-through cooling systems, 4% of the water input evaporates to air. The process water has in the chemical industry an average evaporation rate of 20.5%. In the specific case of the Gendorf factory, the calculated evaporation rate based on the data published is 6.3%. This matches the qualitative information, that the majority of the cooling systems in Gendorf are once-through and that the amount of cooling water used is significantly higher than the amount of process water used (Gendorf, 2016, Umwelterklärung, www.gendorf.de).
  property fraction, origin: fresh water 0; name fraction_origin_fresh_water
  property fraction, origin: salt water 0; name fraction_origin_salt_water
  property fraction, origin: unspecified 1; name fraction_origin_unspecified
- Water [water, unspecified]: 0.0167 m3; lognormal variance with pedigree 0.010025, pedigree (2,3,2,2,3)
  Calculated based on literature data published by the industry (Gendorf, 2016, Umwelterklärung, www.gendorf.de). The amount of water released back to the environment consists of the amount of process water treated in the internal WWTP and then released back to the environment and the amount of cooling water released back to the environment.
  property carbon content, fossil 0; name C_content_fossil
  property carbon content, non-fossil 0; name C_content_non_fossil
  property fraction, origin: fresh water 0; name fraction_origin_fresh_water_Ww
  property fraction, origin: salt water 0; name fraction_origin_salt_water_Ww
  property fraction, origin: unspecified 1; name fraction_origin_unspecified_Ww
  property water in wet mass 1000 kg; name WWM

## Sampling procedure
Data based on literature and stoichiometric calculations. Some values are calculated based on data from a large chemical factory located in Germany. For more details, see the comments of the exchanges.

## Review by Gregor Wernet 2017-08-04
This dataset was additionally reviewed in a separate review process by Eric Johnson of Atlantic Consulting as well as Emilia Moreno Ruiz and Gregor Wernet of ecoinvent.
