# heat and power co-generation, diesel, 200kW electrical, SCR-NOx reduction

Dataset: EcoSpold 2, unit process
Geography: CH
Time period: 2000-01-01 to 2022-12-31
Technology level: modern
Classification: EcoSpold01Categories: oil/cogeneration
Classification: ISIC rev.4 ecoinvent: 3530:Steam and air conditioning supply
Synonyms: SCR; Selective Catalytic Reduction
Tags: oil power; with true value; ConvertedDataset
Scenario: Business-as-Usual
System model: Substitution, consequential, long-term
Generated by: [System]
Published in: Heck, T. 2007
Database: ecoinvent
isCopyrightProtected: true

## General comment
The multioutput-process 'diesel, burned in cogen 200kWe diesel SCR, allocation exergy' delivers the coproducts 'heat, at cogen 200kWe diesel SCR, allocation exergy' and 'electricity, at cogen 200kWe diesel SCR, allocation exergy'. The exergy allocation is the allocation scheme suggested to be used within ecoinvent (e.g. in electricity mixes).
[This dataset was already contained in the ecoinvent database version 2. It was not individually updated during the transfer to ecoinvent version 3. Life Cycle Impact Assessment results may still have changed, as they are affected by changes in the supply chain, i.e. in other datasets. This dataset was generated following the ecoinvent quality guidelines for version 2. It may have been subject to central changes described in the ecoinvent version 3 change report (http://www.ecoinvent.org/database/ecoinvent-version-3/reports-of-changes/), and the results of the central updates were reviewed extensively. The changes added e.g. consistent water flows and other information throughout the database. The documentation of this dataset can be found in the ecoinvent reports of version 2, which are still available via the ecoinvent website. The change report linked above covers all central changes that were made during the conversion process.]

## Included activities end
The module includes fuel input, infrastructure, emissions to air, and substances needed for operation.

## Geography
Emissions and efficiencies adjusted to Swiss emission regulation (LRV, Luftreinhalteverordnung) valid in year 2000.

## Technology
Average technology available on market.

## Time period
The Annual Production Volume is valid for the year 2011.

## Parameters
- scaling factor: 2.32558 dimensionless; name scaling_factor
  Dataset scaled to the output of 1MJ of heat.

## Reference product
- heat, district or industrial, other than natural gas: 1 MJ; name heat; = 0.43 * scaling_factor; By-product classification allocatable product; CPC 17300: Steam and hot water
  Amount was scaled to 1.
  EcoSpold01Location=CH
  production volume 1.17255e8 MJ
    Calculated from electricity output. Ecoinvent v2 report 6_XIV Table 5.5 and 5.10
  property Corresponding fuel use 2.32912 MJ; name fuel_use; = 0.0234*42.8/0.43
    Lower heating value of the fuel input related to the heat/electricity output
  property exergy 0.163854 MJ; name heat_exergy
    allocation factor for electricity (=1) vs. heat, where heat is calculated as the termodynamic mean temperature Tm = (Tfeed-Treturn)/ln(Tfeed/Treturn), relative to the application temperature (Tu, typically = 293 K), i.e. (Tm-Tu)/Tm
  property price 0.0106 EUR2005
    Average European district heat price from Ecoheatcool and Euroheat 2005-2006, Ecoheat Work package 1: The European heat market. Final report. 10.6 EUR/GJ i s the price of district heat. http://www.solarthermalworld.org/files/Ecoheatcool%20WP1%20Web.pdf?download
  property true value relation 0.163854; name heat_true_value_relation
    property to calculate "true value" from
  properties: carbon allocation 0 kg, carbon content 0, heating value, net 1 MJ

## Inputs from technosphere
- diesel: 0.0544186 kg; = 0.0234 * scaling_factor; lognormal variance with pedigree 0.04, pedigree (1,1,5,1,1)
  Amount was scaled to the amount of reference product.
  EcoSpold01Location=CH
  properties: carbon content, fossil 0.865, dry mass 1 kg, heating value, net 42.8 MJ, wet mass 1 kg
  note on carbon content, fossil: C-content of diesel is 86.5% (ecoinvent v2.2 report 6_IV, Tab 3.14)
- electricity, high voltage: -0.251163 kWh; name electricity; = 0.108 * scaling_factor
  Amount was scaled to the amount of reference product.
  EcoSpold01Location=CH
  production volume
    Literature value/calculated value. Valid for 2011.
    Based on Stolz&Frischknecht 2015, Tables 3.7, 3.6 and the SBB railway electricity mix from Itten et al. 2012 Table 3.182.
    A loss of 5% from gross to net is assumed for oil power.
    Stolz, P., Frischnkecht, R. 2015. Umweltbilanz Strommix Schweiz 2011. Issued by treeze Ltd. for the Federal Office for the Environment, Switzerland.
    Itten, R., Frischknecht, R., Stucki, M. 2012. Life Cycle Inventories of Electricity Mixes and Grid. ESU-services Ltd., fair conulting in sustainability, Uster. "
  property exergy 3.6 MJ; name electricity_exergy
  property true value relation 3.6; name electricity_true_value_relation
  properties: price 0.0977 EUR2005
  note on exergy: allocation factor for electricity (=1) vs. heat, where heat is calculated as the termodynamic mean temperature Tm = (Tfeed-Treturn)/ln(Tfeed/Treturn), relative to the application temperature (Tu, typically = 293 K), i.e. (Tm-Tu)/Tm
- heat and power co-generation unit, 200kW electrical, diesel SCR, common components for heat+electricity: 1.26047e-8 unit; = 5.42E-09 * scaling_factor; lognormal variance with pedigree 0.04, pedigree (1,1,5,1,1)
  EcoSpold01Location=RER
  Amount was scaled to the amount of reference product.
- heat and power co-generation unit, 200kW electrical, diesel SCR, components for electricity only: 1.26047e-8 unit; = 5.42E-09 * scaling_factor; lognormal variance with pedigree 0.04, pedigree (1,1,5,1,1)
  Amount was scaled to the amount of reference product.
  EcoSpold01Location=RER
- heat and power co-generation unit, 200kW electrical, diesel SCR, components for heat only: 1.26047e-8 unit; = 5.42E-09 * scaling_factor; lognormal variance with pedigree 0.04, pedigree (1,1,5,1,1)
  EcoSpold01Location=RER
  Amount was scaled to the amount of reference product.
- lubricating oil: 0.000155814 kg; = 6.7E-05 * scaling_factor; lognormal variance with pedigree 0.05, pedigree (1,1,5,1,1)
  EcoSpold01Location=RER
  vender information
  Amount was scaled to the amount of reference product.
  properties: carbon content, fossil 0.75, dry mass 1 kg, heating value, net 40.2 MJ, wet mass 1 kg
  note on carbon content, fossil: Lubricating oil is produced from diesel. C-content/dry mass of fats and oils considered 75%, from: ecoinvent v2.2 report, n 15a, pg 40
  note on heating value, net: Literature value, Source: IPCC 2006, 2006 IPCC Guidelines for National Greenhouse Gas Inventories, Prepared by the National Greenhouse Gas Inventories Programme, Eggleston H.S., Buendia L., Miwa K., Ngara T. and Tanabe K. (eds). Published: IGES, Japan
- urea: 0.00398846 kg; = (0.0008 * scaling_factor)*2.14379903903132; lognormal variance with pedigree 0.07, pedigree (1,1,5,1,1)
  The exchange has been updated from 'urea, as N' into 'urea' and therefore its amount has been scaled (multiplied) from 0.0019 kg by 2.1438 kg of 'urea' per kg of 'urea, as N'. Original comment of the exchange is: different references; uncertainty of urea needs from variation of NOx emissions before SCR and NH3 losses
  Amount was scaled to the amount of reference product.
  EcoSpold01Location=RER
  properties: carbon content, fossil 0.2, dry mass 1 kg, wet mass 1 kg
- waste mineral oil: -0.000155814 kg; name waste_min_oil; = 6.7E-05 * scaling_factor; lognormal variance with pedigree 0.12, pedigree (1,1,1,1,1)
  EcoSpold01Location=CH
  rough estimate
  Amount was scaled to the amount of reference product.
  production volume
    Calculated from the production volume of heat, district or industrial, other than natural gas in proportion to the respective output amounts.
  properties: carbon content, fossil 0.864444, dry mass 0.9 kg, heating value, net 34.7 MJ, water content 0.111111, wet mass 1 kg
  note on carbon content, fossil: Tab A.6, ecoinvent v2.2 report 13_I. C content has been calculated after data in the tables, and then referred to 1 kg DM
  note on heating value, net: Value taken from the general comment of the treatment dataset.

## Emissions to nature
- Ammonia [air, urban air close to ground]: 2.32558e-6 kg; = 1E-06 * scaling_factor; lognormal variance with pedigree 0.16, pedigree (1,1,5,1,1)
  estimate based on different references
  Amount was scaled to the amount of reference product.
- Carbon dioxide, fossil [air, urban air close to ground]: 0.171395 kg; = 0.0737 * scaling_factor; lognormal variance with pedigree 0.04, pedigree (1,1,5,1,1)
  composition of oil
  Amount was scaled to the amount of reference product.
- Carbon monoxide, fossil [air, urban air close to ground]: 0.000348837 kg; = 0.00015 * scaling_factor; lognormal variance with pedigree 0.16, pedigree (1,1,5,1,1)
  (same comment as for Ammonia)
- Dinitrogen monoxide [air, urban air close to ground]: 1.16279e-5 kg; = 5E-06 * scaling_factor; lognormal variance with pedigree 0.69, pedigree (1,1,5,1,1)
  rough estimate
  Amount was scaled to the amount of reference product.
- Methane, fossil [air, urban air close to ground]: 2.7907e-5 kg; = 1.2E-05 * scaling_factor; lognormal variance with pedigree 0.16, pedigree (1,1,5,1,1)
  (same comment as for Ammonia)
- NMVOC, non-methane volatile organic compounds [air, urban air close to ground]: 0.000116279 kg; = 5E-05 * scaling_factor; lognormal variance with pedigree 0.16, pedigree (1,1,5,1,1)
  (same comment as for Ammonia)
- Nitrogen oxides [air, urban air close to ground]: 0.000162791 kg; = 7E-05 * scaling_factor; lognormal variance with pedigree 0.06, pedigree (1,1,5,1,1)
  (same comment as for Ammonia)
- Particulate Matter, < 2.5 um [air, urban air close to ground]: 2.32558e-6 kg; = 1E-06 * scaling_factor; lognormal variance with pedigree 0.16, pedigree (1,1,5,1,1)
  (same comment as for Ammonia)
- Platinum [air, urban air close to ground]: 1.62791e-11 kg; = 7E-12 * scaling_factor; lognormal variance with pedigree 1.37, pedigree (1,1,5,1,1)
  (Artelt et al. 2000)
  Amount was scaled to the amount of reference product.
- Sulfur dioxide [air, urban air close to ground]: 0.000116279 kg; = 5E-05 * scaling_factor; lognormal variance with pedigree 0.05, pedigree (1,1,5,1,1)
  composition of oil
  Amount was scaled to the amount of reference product.

## Sampling procedure
Literature. Manufacturer information.

## Extrapolations
Annual Production volume for the year 2009. Uncertainty has been adjusted accordingly.

## Review by Gerald Rebitzer (obsolete) 2003-07-03
passed

## Review by Emilia Moreno Ruiz 2012-04-16
calculation of fuel use property.
