# smelting and refining of nickel concentrate, 7% Ni

Dataset: EcoSpold 2, unit process
Geography: CN
Time period: 2017-01-01 to 2022-12-31
Technology level: current
Classification: ISIC rev.4 ecoinvent: 2420:Manufacture of basic precious and other non-ferrous metals
Scenario: Business-as-Usual
System model: Substitution, consequential, long-term
Generated by: Efstathios Kakkos
Database: ecoinvent
isCopyrightProtected: true

## General comment
This dataset is based on the following publication: Deng, S. Y., & Gong, X. Z. (2018). Life Cycle Assessment of Nickel Production in China. Materials Science Forum, 913, 1004-1010. doi:10.4028/www.scientific.net/MSF.913.1004 . Specific modifications were made in order to make the dataset more transparent.The publication deals with the pyrometallurgical production of electrolytic nickel (99.98% concentrated) by sulfide ore (1% concentration). This activity represents the production of nickel class I (99.98% purity) from nickel concentrate (6.78% concentration).

## Included activities start
The activity starts with the smelting of the nickel concentrate, 6.78% beneficiated, which is the outcome of mining and beneficiation processes of nickel sulfidic ore.

## Included activities end
The activity ends with the production of refined nickel, 99.98% concentrated.

## Allocation
No allocation is applied.

## Geography
Dataset valid for the entire corresponding region.

## Technology
The nickel concentrate (6.78% beneficiated - product of the mining and beneficiation processes) undergoes drying, melting in flash furnace and converting to produce high nickel matte. The nickel matte undergoes grinding-floating separation and is refined through anode plate casting and electrolysis in order to produce electrolytic nickel 99.98% pure. Deng, S. Y., & Gong, X. Z. (2018). Life Cycle Assessment of Nickel Production in China. Materials Science Forum, 913, 1004-1010. doi:10.4028/www.scientific.net/MSF.913.1004

## Time period
Data are considered representative of current production practices.

## Reference product
- nickel, class 1: 1 kg; name Ni; By-product classification allocatable product; CPC 41422: Unwrought nickel; CAS 7440-02-0
  Nickel Class I produced in China is 99.98% pure.
  production volume 2.32e8 kg
    The production volume is expressed in kg. The chinese annual production of nickel class 1 is 232000000 kg (according to the 2015 minerals yearbook provided by the U.S. Geological Survey).
  property price 12.0741 EUR2005
    Price calculated as 5-year market average (2015-2019; USD/kg; USGS [2020]) and converted to EUR2005 (USD2019/EUR2005 exchange rate: 0.62; Official Data Foundation [2020] and Macrotrends [2020]).
  properties: carbon allocation 0 kg, carbon content 0, carbon content, fossil 0, carbon content, non-fossil 0, dry mass 1 kg, nickel content 0.9998, water content 0, water in wet mass 0 kg, wet mass 1 kg

## Inputs from technosphere
- aluminium hydroxide factory: 9.24e-10 unit; lognormal variance with pedigree 0.3147, pedigree (3,2,3,1,2)
  Input assumed for completeness purposes. Value taken from the existing dataset ''smelting and refining of nickel ore, GLO'' from the 3.6 version of the Ecoinvent database.
- ammonium sulfate: -2.11 kg; lognormal variance with pedigree 0.0033, pedigree (3,2,1,1,2)
  This waste has been included for completness purposes and it was not originally present in the data source. Amount has been taken from: Khoo, J. Z., Haque, N., Woodbridge, G., McDonald, R., & Bhattacharya, S. (2017). A life cycle assessment of a new laterite processing technology. Journal of Cleaner Production, 142, 1765-1777. doi:<https://doi.org/10.1016/j.jclepro.2016.11.111>.
  production volume
    The production volume is expressed in kg. Its calculation is based on the fact that for the production of 1 kg of nickel class 1, 2.11 kg of ammonium sulfate will be produced as a byproduct (based on simplified water mass balance). The chinese annual production of refined nickel is 232000000 kg (see nickel class I production volume comment).
  properties: dry mass 1 kg, price 0.38 EUR2005, wet mass 1 kg
- chemical, inorganic: 0.00501 kg; lognormal variance with pedigree 0.0053, pedigree (3,2,3,1,2)
  Value taken from Deng et al. (2018) (more information on the sampling procedure) and adjusted from the original dataset to correspond to the production of 1 kg of nickel class (99.8% purity). Proxy considered for liquid alkali.
  properties: carbon content, fossil 0.003, dry mass 1 kg, wet mass 1 kg
  note on carbon content, fossil: This dataset is an unweighted average of 20 inorganic substances (listed in Tab 88.1, ecoinvent v2.2 report 8, part II), being part of the top100 chemicals included in this database. The C-content has also been calculated as an unweighted average of the C content of the substances composing this dataset.
- chemical, organic: 0.00167 kg; lognormal variance with pedigree 0.0053, pedigree (3,2,3,1,2)
  Value taken from Deng et al. (2018) (more information on the sampling procedure) and adjusted from the original dataset to correspond to the production of 1 kg of nickel class (99.8% purity). Proxy considered for xanthate.
  properties: carbon content, fossil 0.628, dry mass 1 kg, heating value, net 19.03 MJ, wet mass 1 kg
  note on carbon content, fossil: This dataset is an unweighted average of 20 organic substances (listed in Tab 88.1, ecoinvent v2.2 report 8, part II), being part of the top100 chemicals included in this database. The C-content has also been calculated as an unweighted average of the C content of the substances composing this dataset.
- chlorine, liquid: 0.168 kg; lognormal variance with pedigree 0.0053, pedigree (3,2,3,1,2)
  Value taken from Deng et al. (2018) (more information on the sampling procedure) and adjusted from the original dataset to correspond to the production of 1 kg of nickel class (99.8% purity).
  properties: dry mass 1 kg, wet mass 1 kg
- hard coal: 7.41 kg; lognormal variance with pedigree 0.0053, pedigree (3,2,3,1,2)
  (same comment as for chlorine, liquid)
  properties: carbon content, fossil 0.845, dry mass 0.94 kg, heating value, net 27.91 MJ, water content 0.0638298, wet mass 1 kg
  note on carbon content, fossil: C content 75-94% (specified in Tab 1.1, report 6, part VI). A mean content of 0.845 kg C/ kg dry hard coal was considered
  note on heating value, net: Based on the Characterization factor of Hard coal in the CED method
- hydrochloric acid, without water, in 30% solution state: 0.681 kg; lognormal variance with pedigree 0.0053, pedigree (3,2,3,1,2)
  (same comment as for chlorine, liquid)
  properties: dry mass 1 kg, heating value, net 3.32 MJ, wet mass 1 kg
- natural gas, high pressure: 0.0431 m3; lognormal variance with pedigree 0.0053, pedigree (3,2,3,1,2)
  (same comment as for chlorine, liquid)
  properties: carbon content, fossil 0.602381, dry mass 0.84 kg, heating value, net 36 MJ, wet mass 0.84 kg
  note on carbon content, fossil: An average C content of 0.506 kg C/ m3 has been assumed (this average has been calculated using data in Tab 3.5, ecoinvent v2.2 report 6_V
  note on heating value, net: Literature value, Source: Christoph Meili;Niels Jungbluth;Maresa Bussa (2021) Life cycle inventories of crude oil and natural gas extraction. ESU-services Ltd. commissioned by BAFU & VSG, Schaffhausen, Switzerland, http://esu-services.ch/data/public-lci-reports/
- nickel concentrate, 7% Ni: 15.3727 kg; lognormal variance with pedigree 0.0053, pedigree (3,2,3,1,2)
  Nickel concentrate contains 6.78% Nickel.
  properties: dry mass 1 kg, wet mass 1 kg
- nickel smelter slag: -15.2284 kg; lognormal variance with pedigree 0.0033, pedigree (3,2,1,1,2)
  This waste has been included for completness purposes and it was not originally present in the data source. The amount of nickel smelter slag has been calculated through mass balance.
  production volume
    The production volume is expressed in kg. Its calculation is based on the fact that for the production of 1 kg of nickel class 1,15.228 kg of nickel smelter slag will be produced as a byproduct (based on simplified mass balance). The chinese annual production of refined nickel is 232000000 kg (see nickel class I production volume comment).
  properties: carbon content, fossil 0.0379331, dry mass 1 kg, nickel content 0.00278816, wet mass 1 kg
- non-ferrous metal smelter: 4.61e-11 unit; lognormal variance with pedigree 0.3447, pedigree (3,2,3,1,2)
  (same comment as for aluminium hydroxide factory)
- petroleum: 0.156 kg; lognormal variance with pedigree 0.0053, pedigree (3,2,3,1,2)
  (same comment as for chlorine, liquid)
  properties: carbon content, fossil 0.85, dry mass 1 kg, heating value, net 43.4 MJ, wet mass 1 kg
- steam, in chemical industry: -6.09166 kg; lognormal variance with pedigree 0.0033, pedigree (3,2,1,1,2)
  This waste has been included for completness purposes and it was not originally present in the data source. The amount of steam has been calculated through mass balance.
  production volume
    The production volume is expressed in kg. Its calculation is based on the fact that for the production of 1 kg of nickel class 1, 6.091660911 kg of steam will be produced as a byproduct (based on simplified water mass balance). The chinese annual production of refined nickel is 232000000 kg (see nickel class I production volume comment).
  properties: dry mass 1 kg, price 0.015 EUR2005, wet mass 1 kg
- sulfuric acid: 0.272 kg; lognormal variance with pedigree 0.0053, pedigree (3,2,3,1,2)
  (same comment as for chlorine, liquid)
  properties: dry mass 1 kg, wet mass 1 kg
- wastewater, average: -0.513566 m3; lognormal variance with pedigree 0.0033, pedigree (3,2,1,1,2)
  This waste has been included for completness purposes and it was not originally present in the data source. The amount of wastewater has been calculated through mass balance.
  production volume
    The production volume is expressed in m3. Its calculation is based on the fact that for the production of 1 kg of nickel class 1, 0.513566242 m3 of wastewater will be produced as a byproduct (based on simplified water mass balance). The chinese annual production of refined nickel is 232000000 kg (see nickel class I production volume comment).
  properties: carbon content, non-fossil 0.194039, dry mass 0.346837 kg, water content 2882.2, wet mass 1000 kg
  note on carbon content, non-fossil: 0.0673 kg TOC/m3 (Tab A.17, ecoinvent v2.2 report 13_I). TOC was considered as Total Carbon.

## Inputs from nature
- Oxygen [natural resource, in air]: 19.52 kg; lognormal variance with pedigree 0.0447, pedigree (3,2,3,1,2)
  Elemental composition of coal (wt%): C: 84.4, H: 5.40, N: 1.70, S: 1.80 and O: 6.70. Source: Reid, William (1973). "Chapter 9: Heat Generation, Transport, and Storage". In Robert Perry; Cecil Chilton (eds.). Chemical Engineers' Handbook (5 ed.).The theoretical oxygen demand for combustion of hard coal was calculated based on the equation: 0.08*(C/3+H)+0.01*S-0.01*O . Source of Equation:
  Mazumdar, B. K. (2000). Theoretical oxygen requirement for coal combustion: relationship with its calorific value. Fuel, 79(11), 1413-1419. doi:<https://doi.org/10.1016/S0016-2361(99)00272-0>
- Water, unspecified natural origin [natural resource, in water]: 0.513 m3; lognormal variance with pedigree 0.0053, pedigree (3,2,3,1,2)
  (same comment as for chlorine, liquid)

## Emissions to nature
- Arsenic ion [air, non-urban air or from high stacks]: 1.32e-5 kg; lognormal variance with pedigree 0.6547, pedigree (3,2,3,1,2)
  (same comment as for chlorine, liquid)
- Carbon dioxide, fossil [air, non-urban air or from high stacks]: 15.8 kg; lognormal variance with pedigree 0.0053, pedigree (3,2,3,1,2)
  (same comment as for chlorine, liquid)
- Carbon monoxide, fossil [air, non-urban air or from high stacks]: 2.64 kg; lognormal variance with pedigree 0.6547, pedigree (3,2,3,1,2)
  (same comment as for chlorine, liquid)
- Chromium III [air, non-urban air or from high stacks]: 1.12e-6 kg; lognormal variance with pedigree 0.6547, pedigree (3,2,3,1,2)
  (same comment as for chlorine, liquid)
- Cobalt II [air, non-urban air or from high stacks]: 3e-5 kg; lognormal variance with pedigree 0.6547, pedigree (3,2,3,1,2)
  Emission amount based on value from following Report: Classen et al (2009) Life Cycle inventories of metals, Part IV Nickel, page 23 table 5.9.
- Copper ion [air, non-urban air or from high stacks]: 4e-5 kg; lognormal variance with pedigree 0.6547, pedigree (3,2,3,1,2)
  (same comment as for Cobalt II)
- Dinitrogen monoxide [air, non-urban air or from high stacks]: 0.000264 kg; lognormal variance with pedigree 0.0447, pedigree (3,2,3,1,2)
  (same comment as for chlorine, liquid)
- Dioxins, measured as 2,3,7,8-tetrachlorodibenzo-p-dioxin [air, non-urban air or from high stacks]: 1e-11 kg; lognormal variance with pedigree 0.0447, pedigree (3,2,3,1,2)
  (same comment as for Cobalt II)
- Lead II [air, non-urban air or from high stacks]: 1.31e-6 kg; lognormal variance with pedigree 0.6547, pedigree (3,2,3,1,2)
  (same comment as for chlorine, liquid)
- Methane, fossil [air, non-urban air or from high stacks]: 0.000195 kg; lognormal variance with pedigree 0.0447, pedigree (3,2,3,1,2)
  (same comment as for chlorine, liquid)
- NMVOC, non-methane volatile organic compounds [air, non-urban air or from high stacks]: 0.0118 kg; lognormal variance with pedigree 0.0447, pedigree (3,2,3,1,2)
  (same comment as for chlorine, liquid)
- Nickel II [air, non-urban air or from high stacks]: 3e-5 kg; lognormal variance with pedigree 0.6547, pedigree (3,2,3,1,2)
  (same comment as for Cobalt II)
- Nitrogen oxides [air, non-urban air or from high stacks]: 0.0914 kg; lognormal variance with pedigree 0.0447, pedigree (3,2,3,1,2)
  (same comment as for chlorine, liquid)
- Particulate Matter, < 2.5 um [air, non-urban air or from high stacks]: 2.00999e-5 kg; lognormal variance with pedigree 0.3047, pedigree (3,2,3,1,2)
  Total particulate matter emmited is 0.0161 kg. The mass fractions for PM<2.5, PM2.5 - 10 and PM>10 are 0.1%, 74.9% and 25.0% respectively and are based on the values of table 5.9 of the Classen report ''Life Cycle Inventories of Metals'' data v2.1 (2009) contained in the section Part IV Nickel page 23.
- Particulate Matter, > 10 um [air, non-urban air or from high stacks]: 0.00401998 kg; lognormal variance with pedigree 0.0447, pedigree (3,2,3,1,2)
  (same comment as for Particulate Matter, < 2.5 um)
- Particulate Matter, > 2.5 um and < 10um [air, non-urban air or from high stacks]: 0.0120599 kg; lognormal variance with pedigree 0.1247, pedigree (3,2,3,1,2)
  (same comment as for Particulate Matter, < 2.5 um)
- Sulfur dioxide [air, non-urban air or from high stacks]: 0.0663 kg; lognormal variance with pedigree 0.0053, pedigree (3,2,3,1,2)
  (same comment as for chlorine, liquid)
- Tin ion [air, non-urban air or from high stacks]: 7e-6 kg; lognormal variance with pedigree 0.6547, pedigree (3,2,3,1,2)
  (same comment as for Cobalt II)
- Vanadium V [air, non-urban air or from high stacks]: 1.91e-5 kg; lognormal variance with pedigree 0.6547, pedigree (3,2,3,1,2)
  (same comment as for chlorine, liquid)
- Zinc II [air, non-urban air or from high stacks]: 0.0001 kg; lognormal variance with pedigree 0.6547, pedigree (3,2,3,1,2)
  (same comment as for Cobalt II)

## Sampling procedure
Majority of the data originated from national statistics [1], or process design data [2]. The calculation of the emissions was based on emissions factors on the 2006 IPCC Guidelines for National Greenhouse Gas Inventories. The inventory of electricity, coke, diesel and other basic energy come from Boxue Sun`s results [3]. The sources used for the provision of the dataset is listed below:
[1] China nonferrous metals industry association, The almanac of China nonferrous metals in-dustry, 2011-2015[M], The Almanac of China Nonferrous Metals Industry, 2011-2015.

[2] Heavy metal smelting design manual (copper nickel roll)[M], Metallurgical Industry Press, 2007.

[3] B.X. Sun, Z.R. Nie, Y. Liu, X.Z. Gong, F. Gao, Z.H. Wang, Research on life cycle CO2 emmissions of energy carriers in China[J], Materials Research Innovations, 18 (2014), 56-61.

## Extrapolations
Data are assumed to represent the average pyrometallurgical production of Nickel class 1 in China.
