# polyethylene, high density, granulate, recycled to generic market for high density PE granulate

Dataset: EcoSpold 2, unit process
Geography: Europe without Switzerland
Time period: 2010-01-01 to 2022-12-31
Technology level: current
Classification: ISIC rev.4 ecoinvent: 2013:Manufacture of plastics and synthetic rubber in primary forms
Scenario: Business-as-Usual
System model: Substitution, consequential, long-term
Generated by: Thomas Kägi
Database: ecoinvent
isCopyrightProtected: true

## General comment
This is a renaming activity linking recycled polyethylene (PE), high density (HD), granulate to the generic market for HD-PE granulate.
Transport distances for road and rail freight based product category SCTG code 242 in the US BTS Commodity Flow Survey from 2012, US Dep. Of Transportation, Bureau of Transportation Statistics. Air freight was omitted due to assumed low relevance for this product category.

## Reference product
- polyethylene, high density, granulate, recycled: 1 kg; By-product classification allocatable product; CPC 34710: Polymers of ethylene, in primary forms; CAS 9002-88-4
  production volume 1 kg
  properties: carbon allocation 0.857 kg, carbon content 0.857, carbon content, fossil 0.857, carbon content, non-fossil 0, dry mass 1 kg, heating value, net 42.47 MJ, price 0 EUR2005, water content 0, water in wet mass 0 kg, wet mass 1 kg

## Inputs from technosphere
- polyethylene, high density, granulate: 1 kg
  production volume
    Recycled granulates assumed to represent negligible share of oveall global market for granulate (about 2% closed-loop recycling for plastic packaging material according WRF 2016), hence production volume here set to low arbitrarily amount to link the recycled product to the generic market.
  properties: carbon content, fossil 0.857143, dry mass 1 kg, heating value, net 42.47 MJ, price 0.739 EUR2005, wet mass 1 kg
  note on carbon content, fossil: Polyethylene is formed out of a huge amount of ethylene monomers (C2H4) (ecoinvent v2.2 report 11_II). MW=28 g/mol
