# coking

Dataset: EcoSpold 2, unit process
Geography: DE
Time period: 1990-01-01 to 2022-12-31
Technology level: current
Classification: ISIC rev.4 ecoinvent: 1910:Manufacture of coke oven products
Classification: EcoSpold01Categories: hard coal/fuels
Tags: ConvertedDataset
Scenario: Business-as-Usual
System model: Substitution, consequential, long-term
Generated by: Christian Bauer
Published in: Röder, A. 2004
Database: ecoinvent
isCopyrightProtected: true

## General comment
The multioutput-prozess "hard coal, in coke plant" delivers the coproducts "coke oven gas, at plant", "tar, at coke plant", and "benzene, at coke plant". 79.8% of the total energy and material input as well as emission from the coke plant are allocated to coke production, 15% to coke oven gas production, 4.1% to tar production, and 1.1% to benzene production. This allocation has been performed considering the energy content of the coke compared to all other byproducts. Hard coal coke is assumed to have a low heating value 28.6 MJ/kg and bulk density is 530 kg/m3.
[This dataset was already contained in the ecoinvent database version 2. It was not individually updated during the transfer to ecoinvent version 3. Life Cycle Impact Assessment results may still have changed, as they are affected by changes in the supply chain, i.e. in other datasets. This dataset was generated following the ecoinvent quality guidelines for version 2. It may have been subject to central changes described in the ecoinvent version 3 change report (http://www.ecoinvent.org/database/ecoinvent-version-3/reports-of-changes/), and the results of the central updates were reviewed extensively. The changes added e.g. consistent water flows and other information throughout the database. The documentation of this dataset can be found in the ecoinvent reports of version 2, which are still available via the ecoinvent website. The change report linked above covers all central changes that were made during the conversion process.]

## Included activities end
The coking has been considered as a black box. The energy necessary for the process is assumed to be provided by part of the input coal and by some electricity. The module includes chemicals used for operation and the associated transport requirements. The transports of coke are considered to be negligible, because the plant is assumed to be coal mine-mouth. The module also includes the total emissions to air and water from the entire plant. Coke oven gas, tar, and benzene are byproducts of coking.

## Geography
The estimation of the energy input is made on the basis of data for all coke plants in West Germany in 1991. Emissions are averages for all coke plants in Nordrhein-Westfahlen, covering 70 % of German production.

## Technology
Average in Germany in early 1990s.

## Parameters
- fraction, cooling water, cooling pond system, to air: 0.032 dimensionless; name fraction_CW_CP_to_air; lognormal variance with pedigree 0.0413, pedigree (2,3,1,3,1)
  Calculated based on literature value (Scown, C.D., 2011, Water Footprint of U.S. Transportation Fuels and supplying information of the article) (Vionnet, S., Quantis Water Database - Technical Report, 2012).
- fraction, cooling water, once-through system, to air: 0.004 dimensionless; name fraction_CW_OT_to_air; lognormal variance with pedigree 0.0413, pedigree (2,3,1,3,1)
  (same comment as for fraction, cooling water, cooling pond system, to air)
- fraction, cooling water, recirculating system, to air: 0.771 dimensionless; name fraction_CW_R_to_air; lognormal variance with pedigree 0.0413, pedigree (2,3,1,3,1)
  (same comment as for fraction, cooling water, cooling pond system, to air)
- fraction, cooling water, to air: 0.3875 dimensionless; name fraction_CW_to_air; = (0.5*fraction_CW_OT_to_air)+(0.5*fraction_CW_R_to_air); lognormal variance with pedigree 0.092025, pedigree (4,4,3,2,4)
  Calculated value based on literature value (see comments of the other parametres present in this dataset) and expert opinion. In the case when no industry/literature data are available about the type of cooling or directly fraction, cooling water, to air specific for the process a default assumption is applied. It is assumed that the once-through cooling system is used in 50% of all cases and recirculating system is used in another 50% of all cases.
- fraction, water, decarbonised, to air: 0.3875 dimensionless; name fraction_WDC_to_air; = fraction_CW_to_air; lognormal variance with pedigree 0.092025, pedigree (4,4,3,2,4)
  Calculated value. See comments in the other parametres present in this dataset. Decarbonised water is considered to be always used as cooling water, thus cooling water fractions to air are applied to all carbonised water input flows to calculate the amount of water consumed in the processes.

## Reference product
- coke: 1 MJ; By-product classification allocatable product; CPC 33100: Coke and semi-coke of coal, of lignite or of peat; retort carbon
  EcoSpold01Location=RER
  production volume 1.24348e11 MJ
    Source for mass input: http://www.mining-technology.com/projects/germany/ ; 1.38 kg coal/kg coke; 28.6 MJ/kg
  property carbon content, fossil 0.869149
    81.7% C and 6% water in wet mass (ecoinvent v2.1 report 6_VI Table 7.1)
  property price 0.006 EUR2005
    Temporary price data. Calculated as 90% of purchasers price based on: 2004 prices calculated from Import/Export data (total trades (USD) divided by total weight (kg) in EU27, USA, China, Japan and India) from UN Trade data statistics (http://data.un.org/Explorer.aspx, Accessed 6 July 2010). Data from UN trade are in mass unit. Calorific value (lower) of 28.6 MJ/kg has been used to convert to MJ.
  properties: EcoSpold01Allocation_undefined_1 79.8, EcoSpold01Allocation_undefined_10 79.8, EcoSpold01Allocation_undefined_11 79.8, EcoSpold01Allocation_undefined_12 79.8, EcoSpold01Allocation_undefined_13 79.8, EcoSpold01Allocation_undefined_14 79.8, EcoSpold01Allocation_undefined_15 79.8, EcoSpold01Allocation_undefined_16 79.8, EcoSpold01Allocation_undefined_17 79.8, EcoSpold01Allocation_undefined_18 79.8, EcoSpold01Allocation_undefined_19 79.8, EcoSpold01Allocation_undefined_2 79.8, EcoSpold01Allocation_undefined_20 79.8, EcoSpold01Allocation_undefined_21 79.8, EcoSpold01Allocation_undefined_22 79.8, EcoSpold01Allocation_undefined_23 79.8, EcoSpold01Allocation_undefined_24 79.8, EcoSpold01Allocation_undefined_25 79.8, EcoSpold01Allocation_undefined_26 79.8, EcoSpold01Allocation_undefined_27 79.8, EcoSpold01Allocation_undefined_28 79.8, EcoSpold01Allocation_undefined_29 79.8, EcoSpold01Allocation_undefined_3 79.8, EcoSpold01Allocation_undefined_30 79.8, EcoSpold01Allocation_undefined_31 79.8, EcoSpold01Allocation_undefined_32 79.8, EcoSpold01Allocation_undefined_33 79.8, EcoSpold01Allocation_undefined_34 79.8, EcoSpold01Allocation_undefined_35 79.8, EcoSpold01Allocation_undefined_36 79.8, EcoSpold01Allocation_undefined_37 79.8, EcoSpold01Allocation_undefined_38 79.8, EcoSpold01Allocation_undefined_39 79.8, EcoSpold01Allocation_undefined_4 79.8, EcoSpold01Allocation_undefined_40 79.8, EcoSpold01Allocation_undefined_41 79.8, EcoSpold01Allocation_undefined_42 79.8, EcoSpold01Allocation_undefined_43 79.8, EcoSpold01Allocation_undefined_44 79.8, EcoSpold01Allocation_undefined_45 79.8, EcoSpold01Allocation_undefined_46 79.8, EcoSpold01Allocation_undefined_47 79.8, EcoSpold01Allocation_undefined_48 79.8, EcoSpold01Allocation_undefined_49 79.8, EcoSpold01Allocation_undefined_5 79.8, EcoSpold01Allocation_undefined_50 79.8, EcoSpold01Allocation_undefined_51 79.8, EcoSpold01Allocation_undefined_52 79.8, EcoSpold01Allocation_undefined_53 79.8, EcoSpold01Allocation_undefined_54 79.8, EcoSpold01Allocation_undefined_55 79.8, EcoSpold01Allocation_undefined_56 79.8, EcoSpold01Allocation_undefined_57 79.8, EcoSpold01Allocation_undefined_58 79.8, EcoSpold01Allocation_undefined_59 79.8, EcoSpold01Allocation_undefined_6 79.8, EcoSpold01Allocation_undefined_60 79.8, EcoSpold01Allocation_undefined_61 79.8, EcoSpold01Allocation_undefined_62 79.8, EcoSpold01Allocation_undefined_63 79.8, EcoSpold01Allocation_undefined_64 79.8, EcoSpold01Allocation_undefined_65 79.8, EcoSpold01Allocation_undefined_66 79.8, EcoSpold01Allocation_undefined_67 79.8, EcoSpold01Allocation_undefined_68 79.8, EcoSpold01Allocation_undefined_69 79.8, EcoSpold01Allocation_undefined_7 79.8, EcoSpold01Allocation_undefined_70 79.8, EcoSpold01Allocation_undefined_71 100, EcoSpold01Allocation_undefined_75 79.7999, EcoSpold01Allocation_undefined_76 79.7999, EcoSpold01Allocation_undefined_8 79.8, EcoSpold01Allocation_undefined_9 79.8, carbon allocation 0.0285664 kg, carbon content 0.869149, carbon content, non-fossil 0, dry mass 0.0328671 kg, heating value, net 28.6 MJ, water content 0.0638298, water in wet mass 0.0020979 kg, wet mass 0.034965 kg

## Inputs from technosphere
- benzene: -0.000346957 kg
  EcoSpold01Location=DE
  production volume
    Calculated as 1/79 of mass of coke
  properties: EcoSpold01Allocation_undefined_1 1.1, EcoSpold01Allocation_undefined_10 1.1, EcoSpold01Allocation_undefined_11 1.1, EcoSpold01Allocation_undefined_12 1.1, EcoSpold01Allocation_undefined_13 1.1, EcoSpold01Allocation_undefined_14 1.1, EcoSpold01Allocation_undefined_15 1.1, EcoSpold01Allocation_undefined_16 1.1, EcoSpold01Allocation_undefined_17 1.1, EcoSpold01Allocation_undefined_18 1.1, EcoSpold01Allocation_undefined_74 100, heating value, net 42.5 MJ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
- coal gas: -0.190435 MJ
  The activityLink to "treatment of coal gas, in power plant, DE 2008" was added by ecoinvent during a database update.
  EcoSpold01Location=DE
  production volume
    Calculated relative to coke output with factor 15/79.8
  properties: EcoSpold01Allocation_undefined_1 15, EcoSpold01Allocation_undefined_10 15, EcoSpold01Allocation_undefined_11 15, EcoSpold01Allocation_undefined_12 15, EcoSpold01Allocation_undefined_13 15, EcoSpold01Allocation_undefined_14 15, EcoSpold01Allocation_undefined_15 15, EcoSpold01Allocation_undefined_16 15, EcoSpold01Allocation_undefined_17 15, EcoSpold01Allocation_undefined_72 100, EcoSpold01Allocation_undefined_75 15.0001, EcoSpold01Allocation_undefined_76 15.0001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
- coal tar: -0.0013913 kg
  EcoSpold01Location=DE
  production volume
    Calculated as 3/79 of mass of coke
  properties: EcoSpold01Allocation_undefined_1 4.1, EcoSpold01Allocation_undefined_10 4.1, EcoSpold01Allocation_undefined_11 4.1, EcoSpold01Allocation_undefined_12 4.1, EcoSpold01Allocation_undefined_13 4.1, EcoSpold01Allocation_undefined_14 4.1, EcoSpold01Allocation_undefined_15 4.1, EcoSpold01Allocation_undefined_16 4.1, EcoSpold01Allocation_undefined_17 4.1, EcoSpold01Allocation_undefined_18 4.1, EcoSpold01Allocation_undefined_73 100, heating value, net 28 MJ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
  note on heating value, net: Literature value, Source: IPCC 2006, 2006 IPCC Guidelines for National Greenhouse Gas Inventories, Prepared by the National Greenhouse Gas Inventories Programme, Eggleston H.S., Buendia L., Miwa K., Ngara T. and Tanabe K. (eds). Published: IGES, Japan
- electricity, medium voltage: 0.0021087 kWh; lognormal variance with pedigree 0.34, pedigree (1,1,5,1,1)
  EcoSpold01Location=UCTE
  own assumption
- hard coal: 0.06 kg; lognormal variance with pedigree 0.04, pedigree (1,1,5,1,1)
  standard for ressources
  EcoSpold01Location=UCTE
  properties: carbon content, fossil 0.845, dry mass 0.94 kg, heating value, net 27.91 MJ, water content 0.0638298, wet mass 1 kg
  note on carbon content, fossil: C content 75-94% (specified in Tab 1.1, report 6, part VI). A mean content of 0.845 kg C/ kg dry hard coal was considered
  note on heating value, net: Based on the Characterization factor of Hard coal in the CED method
- hard coal coke factory: 7.3913e-13 unit; lognormal variance with pedigree 0.08, pedigree (1,1,5,1,1)
  own assumption
  EcoSpold01Location=RER
- iron sulfate: 3.17391e-6 kg; lognormal variance with pedigree 0.34, pedigree (1,1,5,1,1)
  EcoSpold01Location=RER
  own assumption
  properties: dry mass 1 kg, wet mass 1 kg
- phosphoric acid, fertiliser grade, without water, in 70% solution state: 6.34783e-6 kg; lognormal variance with pedigree 0.34, pedigree (1,1,5,1,1)
  EcoSpold01Location=GLO
  own assumption
  properties: dry mass 1 kg, wet mass 1 kg
- sodium hydroxide, without water, in 50% solution state: 8.86957e-5 kg; lognormal variance with pedigree 0.34, pedigree (1,1,5,1,1)
  EcoSpold01Location=RER
  own assumption
  properties: dry mass 1 kg, heating value, net 3.03 MJ, wet mass 1 kg
- water, decarbonised: 0.0695652 kg; name water_decarbonised_input; lognormal variance with pedigree 0.34, pedigree (1,1,5,1,1)
  own assumption
  EcoSpold01Location=RER
  properties: wet mass 1 kg

## Emissions to nature
- Aluminium III [air, non-urban air or from high stacks]: 8.86957e-7 kg; lognormal variance with pedigree 0.69, pedigree (1,1,5,1,1)
  own assumption
- Ammonia [air, non-urban air or from high stacks]: 3.17391e-7 kg; lognormal variance with pedigree 1.37, pedigree (1,1,5,1,1)
  own assumption
- Antimony ion [air, non-urban air or from high stacks]: 5.69565e-11 kg; lognormal variance with pedigree 0.69, pedigree (1,1,5,1,1)
  own assumption
- Arsenic ion [air, non-urban air or from high stacks]: 6.52174e-10 kg; lognormal variance with pedigree 0.08, pedigree (1,1,5,1,1)
  own assumption
- Barium II [air, non-urban air or from high stacks]: 1.04783e-8 kg; lognormal variance with pedigree 0.69, pedigree (1,1,5,1,1)
  own assumption
- Benzene [air, non-urban air or from high stacks]: 3.96522e-7 kg; lognormal variance with pedigree 1.37, pedigree (1,1,5,1,1)
  own assumption
- Benzo(a)pyrene [air, non-urban air or from high stacks]: 2.69565e-9 kg; lognormal variance with pedigree 0.08, pedigree (1,1,5,1,1)
  own assumption
- Beryllium II [air, non-urban air or from high stacks]: 1.15652e-10 kg; lognormal variance with pedigree 0.69, pedigree (1,1,5,1,1)
  own assumption
- Boron [air, non-urban air or from high stacks]: 2.85652e-9 kg; lognormal variance with pedigree 0.69, pedigree (1,1,5,1,1)
  own assumption
- Bromine [air, non-urban air or from high stacks]: 5.69565e-10 kg; lognormal variance with pedigree 0.69, pedigree (1,1,5,1,1)
  own assumption
- Cadmium II [air, non-urban air or from high stacks]: 2.53913e-10 kg; lognormal variance with pedigree 0.08, pedigree (1,1,5,1,1)
  own assumption
- Calcium [air, non-urban air or from high stacks]: 1.04783e-7 kg; lognormal variance with pedigree 0.69, pedigree (1,1,5,1,1)
  own assumption
- Carbon dioxide, fossil [air, non-urban air or from high stacks]: 0.00377826 kg; lognormal variance with pedigree 0.05, pedigree (1,1,5,1,1)
  own assumption
- Carbon monoxide, fossil [air, non-urban air or from high stacks]: 4.43478e-5 kg; lognormal variance with pedigree 0.34, pedigree (1,1,5,1,1)
  own assumption
- Chromium III [air, non-urban air or from high stacks]: 1.04783e-9 kg; lognormal variance with pedigree 0.69, pedigree (1,1,5,1,1)
  own assumption
- Cobalt II [air, non-urban air or from high stacks]: 2.53913e-10 kg; lognormal variance with pedigree 0.69, pedigree (1,1,5,1,1)
  own assumption
- Copper ion [air, non-urban air or from high stacks]: 7.78261e-10 kg; lognormal variance with pedigree 0.69, pedigree (1,1,5,1,1)
  own assumption
- Ethane [air, non-urban air or from high stacks]: 7.91304e-7 kg; lognormal variance with pedigree 0.69, pedigree (1,1,5,1,1)
  own assumption
- Ethylene [air, non-urban air or from high stacks]: 2.44348e-6 kg; lognormal variance with pedigree 0.69, pedigree (1,1,5,1,1)
  own assumption
- Ethyne [air, non-urban air or from high stacks]: 7.91304e-8 kg; lognormal variance with pedigree 0.69, pedigree (1,1,5,1,1)
  own assumption
- Hydrocarbons, aliphatic, unsaturated [air, non-urban air or from high stacks]: 7.91304e-8 kg; lognormal variance with pedigree 0.69, pedigree (1,1,5,1,1)
  own assumption
- Hydrogen sulfide [air, non-urban air or from high stacks]: 2.22174e-6 kg; lognormal variance with pedigree 0.69, pedigree (1,1,5,1,1)
  own assumption
- Iodine [air, non-urban air or from high stacks]: 1.04783e-10 kg; lognormal variance with pedigree 0.69, pedigree (1,1,5,1,1)
  own assumption
- Iron ion [air, non-urban air or from high stacks]: 3.65217e-7 kg; lognormal variance with pedigree 0.69, pedigree (1,1,5,1,1)
  own assumption
- Lead II [air, non-urban air or from high stacks]: 4.28696e-9 kg; lognormal variance with pedigree 0.08, pedigree (1,1,5,1,1)
  own assumption
- Magnesium [air, non-urban air or from high stacks]: 3.17391e-7 kg; lognormal variance with pedigree 0.69, pedigree (1,1,5,1,1)
  own assumption
- Manganese II [air, non-urban air or from high stacks]: 3.65217e-9 kg; lognormal variance with pedigree 0.69, pedigree (1,1,5,1,1)
  own assumption
- Mercury II [air, non-urban air or from high stacks]: 5.21739e-11 kg; lognormal variance with pedigree 0.34, pedigree (1,1,5,1,1)
  own assumption
- Methane, fossil [air, non-urban air or from high stacks]: 1.55652e-6 kg; lognormal variance with pedigree 1.37, pedigree (1,1,5,1,1)
  own assumption
- Molybdenum VI [air, non-urban air or from high stacks]: 1.55652e-10 kg; lognormal variance with pedigree 0.69, pedigree (1,1,5,1,1)
  own assumption
- NMVOC, non-methane volatile organic compounds [air, non-urban air or from high stacks]: 4.43478e-6 kg; lognormal variance with pedigree 0.69, pedigree (1,1,5,1,1)
  own assumption
- Nickel II [air, non-urban air or from high stacks]: 1.04783e-9 kg; lognormal variance with pedigree 0.69, pedigree (1,1,5,1,1)
  own assumption
- Nitrogen oxides [air, non-urban air or from high stacks]: 3.81739e-5 kg; lognormal variance with pedigree 0.34, pedigree (1,1,5,1,1)
  own assumption
- Particulate Matter, < 2.5 um [air, non-urban air or from high stacks]: 2.23913e-5 kg; lognormal variance with pedigree 0.34, pedigree (1,1,5,1,1)
  own assumption
- Particulate Matter, > 10 um [air, non-urban air or from high stacks]: 3.71304e-5 kg; lognormal variance with pedigree 0.34, pedigree (1,1,5,1,1)
  own assumption
- Particulate Matter, > 2.5 um and < 10um [air, non-urban air or from high stacks]: 1.05217e-5 kg; lognormal variance with pedigree 0.34, pedigree (1,1,5,1,1)
  own assumption
- Phosphorus [air, non-urban air or from high stacks]: 5.21739e-9 kg; lognormal variance with pedigree 0.69, pedigree (1,1,5,1,1)
  own assumption
- Potassium I [air, non-urban air or from high stacks]: 1.04783e-7 kg; lognormal variance with pedigree 0.69, pedigree (1,1,5,1,1)
  own assumption
- Propane [air, non-urban air or from high stacks]: 3.96522e-7 kg; lognormal variance with pedigree 0.69, pedigree (1,1,5,1,1)
  own assumption
- Propene [air, non-urban air or from high stacks]: 1.58696e-7 kg; lognormal variance with pedigree 0.69, pedigree (1,1,5,1,1)
  own assumption
- Scandium [air, non-urban air or from high stacks]: 2.06087e-10 kg; lognormal variance with pedigree 0.69, pedigree (1,1,5,1,1)
  own assumption
- Selenium IV [air, non-urban air or from high stacks]: 5.21739e-11 kg; lognormal variance with pedigree 0.69, pedigree (1,1,5,1,1)
  own assumption
- Silicon [air, non-urban air or from high stacks]: 1.3e-6 kg; lognormal variance with pedigree 0.69, pedigree (1,1,5,1,1)
  own assumption
- Sodium [air, non-urban air or from high stacks]: 5.21739e-8 kg; lognormal variance with pedigree 0.69, pedigree (1,1,5,1,1)
  own assumption
- Strontium [air, non-urban air or from high stacks]: 1.04783e-8 kg; lognormal variance with pedigree 0.69, pedigree (1,1,5,1,1)
  own assumption
- Sulfur dioxide [air, non-urban air or from high stacks]: 1.9087e-5 kg; lognormal variance with pedigree 0.34, pedigree (1,1,5,1,1)
  own assumption
- Thallium I [air, non-urban air or from high stacks]: 5.21739e-11 kg; lognormal variance with pedigree 0.69, pedigree (1,1,5,1,1)
  own assumption
- Thorium [air, non-urban air or from high stacks]: 2.06087e-10 kg; lognormal variance with pedigree 0.69, pedigree (1,1,5,1,1)
  own assumption
- Tin ion [air, non-urban air or from high stacks]: 1.04783e-10 kg; lognormal variance with pedigree 0.69, pedigree (1,1,5,1,1)
  own assumption
- Titanium ion [air, non-urban air or from high stacks]: 3.17391e-8 kg; lognormal variance with pedigree 0.69, pedigree (1,1,5,1,1)
  own assumption
- Toluene [air, non-urban air or from high stacks]: 7.91304e-8 kg; lognormal variance with pedigree 0.69, pedigree (1,1,5,1,1)
  own assumption
- Uranium [air, non-urban air or from high stacks]: 1.04783e-10 kg; lognormal variance with pedigree 0.69, pedigree (1,1,5,1,1)
  own assumption
- Vanadium V [air, non-urban air or from high stacks]: 2.06087e-9 kg; lognormal variance with pedigree 0.69, pedigree (1,1,5,1,1)
  own assumption
- Water [air, unspecified]: 2.69565e-5 m3; name water_to_air_unspecified; = (water_decarbonised_input/1000*fraction_WDC_to_air); lognormal variance with pedigree 0.0807, pedigree (2,2,5,1,1)
  Calculated value based on literature values and expert opinion. See comments in the parametres' comment field.
  property fraction, origin: fresh water 1; name fraction_origin_fresh_water
  property fraction, origin: salt water 0; name fraction_origin_salt_water
  property fraction, origin: unspecified 0; name fraction_origin_unspecified
- Zinc II [air, non-urban air or from high stacks]: 2.53913e-9 kg; lognormal variance with pedigree 0.69, pedigree (1,1,5,1,1)
  own assumption
- Zirconium [air, non-urban air or from high stacks]: 2.53913e-9 kg; lognormal variance with pedigree 0.69, pedigree (1,1,5,1,1)
  own assumption
- Ammonium [water, surface water]: 7.91304e-7 kg; lognormal variance with pedigree 0.34, pedigree (1,1,5,1,1)
  own assumption
- Chloride [water, surface water]: 6.17391e-5 kg; lognormal variance with pedigree 0.34, pedigree (1,1,5,1,1)
  own assumption
- Hydrogen sulfide [water, surface water]: 1.26957e-7 kg; lognormal variance with pedigree 0.34, pedigree (1,1,5,1,1)
  own assumption
- PAH, polycyclic aromatic hydrocarbons [water, surface water]: 9.52174e-10 kg; lognormal variance with pedigree 0.34, pedigree (1,1,5,1,1)
  own assumption
- Sodium I [water, surface water]: 3.96522e-5 kg; lognormal variance with pedigree 0.34, pedigree (1,1,5,1,1)
  own assumption
- Solids, inorganic [water, surface water]: 3.4913e-5 kg; lognormal variance with pedigree 0.34, pedigree (1,1,5,1,1)
  own assumption
- Water [water, unspecified]: 4.26087e-5 m3; name water_to_water_unspecified; = (water_decarbonised_input/1000)*(1-fraction_WDC_to_air); lognormal variance with pedigree 0.0807, pedigree (2,2,5,1,1)
  (same comment as for Water)
  property carbon content, fossil 0; name C_content_fossil
  property carbon content, non-fossil 0; name C_content_non_fossil
  property fraction, origin: fresh water 1; name fraction_origin_fresh_water_Ww
  property fraction, origin: salt water 0; name fraction_origin_salt_water_Ww
  property fraction, origin: unspecified 0; name fraction_origin_unspecified_Ww
  property water in wet mass 1000 kg; name WWM

## Sampling procedure
literature

## Extrapolations
see Geography/Text

## Review by Hans-Jörg Althaus 2005-07-19
passed
