# electrolyte, nickel-rich to generic market for nickel-rich materials

Dataset: EcoSpold 2, unit process
Geography: GLO
Time period: 1994-01-01 to 2022-12-31
Technology level: current
Classification: ISIC rev.4 ecoinvent: 2420:Manufacture of basic precious and other non-ferrous metals
Scenario: Business-as-Usual
System model: Substitution, consequential, long-term
Generated by: Johannes Müller
Database: ecoinvent
isCopyrightProtected: true

## General comment
This is a renaming activity. It's purpose is to link 'electrolyte, nickel-rich' to the generic 'market for nickel-rich materials'.

## Included activities start
Activity starts with the reception of 'electrolyte, nickel-rich'.

## Included activities end
Activity ends with the 'nickel-rich materials' being ready for transportation.

## Time period
Time period based on the years for which supplying and demanding activities are valid.

## Reference product
- electrolyte, nickel-rich: 1 m3; = amount_RP/dm_electrolyte; By-product classification allocatable product; CPC 342: Basic inorganic chemicals n.e.c.
  Calculated Value. Division of the amount of reference product by the dry mass of the "electrolyte, nickel-rich"
  production volume 1 m3
  properties: carbon allocation 0 kg, carbon content 0, carbon content, fossil 0, carbon content, non-fossil 0, dry mass 77.006 kg, nickel content 1, price 0 EUR2005, water content 12.8737, water in wet mass 991.355 kg, wet mass 1068.36 kg

## Inputs from technosphere
- nickel-rich materials: 77.006 kg; name amount_RP
  production volume
    Represents the total global amount of 'electrolyte, nickel-rich' that is produced by cobalt production activities.
  properties: dry mass 1 kg, nickel content 1, price 11.2412 EUR2005, wet mass 1 kg
