# zirconium and hafnium tetrachloride production, from zircon

Dataset: EcoSpold 2, unit process
Geography: US
Time period: 2020-01-01 to 2024-12-31
Technology level: current
Classification: ISIC rev.4 ecoinvent: 2420:Manufacture of basic precious and other non-ferrous metals
Scenario: Business-as-Usual
System model: Substitution, consequential, long-term
Generated by: Efstathios Kakkos
Database: ecoinvent
isCopyrightProtected: true

## General comment
This dataset refers to the production of 1 kg of nuclear-grade (hafnium-free) zirconium tetrachloride and 0.019091 kg of hafnium tetrachloride produced from zircon by applying the carbochlorination process (Zr(Hf)SiO4 + 4C + 4Cl2 → Zr(Hf)Cl4 + SiCl4 + 4CO), which produces the bundled zirconium & hafnium tetrachloride (Zr(Hf)Cl4) and then the extractive distillation process, which separates the bundled Zr(Hf)Cl4 into pure ZrCl4 and HfCl4 in the US. Since the US is a major producer of pure zirconium & hafnium metal, it is assumed that the US is also a major producer of zirconium and hafnium tetrachloride, representing approximately 26.7% of the global ZrCl4 production.
In the present dataset, there are two reference products (zirconium and hafnium tetrachloride), thus allocation (subdivision) of the Life Cycle Inventory (LCI) is required. The allocation is based on metal mass content in zirconium and hafnium tetrachloride. For more information, consult the ''Modelling & Administrative'' section.
Due to lack of data regarding the carbochlorination process of zircon sand, data were taken from the Gao et al. (2018) publication that contains data on the carbochlorination process of titanium. Exception to this are the inputs of zircon sand, petroleum coke, and chlorine, and the outputs of silicon tetrachloride and carbon monoxide emissions. These exchanges were calculated based on the stoichiometric equation that governs the carbochlorination process (for more information consult the individual exchange comments). Data regarding the extractive distillation process, were taken from the Minh et al. (2015) publication.
Reference 1: Gao, F., Nie, Z., Yang, D., Sun, B., Liu, Y., Gong, X., & Wang, Z. (2018). Environmental impacts analysis of titanium sponge production using Kroll process in China. Journal of Cleaner Production, 174, 771-779. doi:https://doi.org/10.1016/j.jclepro.2017.09.240.
Reference 2: Minh, L. Q., Long, N. V. D., Duong, P. L. T., Jung, Y., Bahadori, A., & Lee, M. (2015). Design of an Extractive Distillation Column for the Environmentally Benign Separation of Zirconium and Hafnium Tetrachloride for Nuclear Power Reactor Applications. Energies, 8(9), 10354-10369.

## Included activities start
The activity starts with the processing of zircon. According to USGS, 54% of zircon in US is supplied from South Africa and 19% from Australia.

Source: <https://pubs.usgs.gov/periodicals/mcs2022/mcs2022-zirconium-hafnium.pdf>

## Included activities end
The activity ends with the production of nuclear-grade zirconium tetrachloride and hafnium tetrachloride,

## Allocation
No allocation is applied.

## Geography
Dataset valid for the entire corresponding region. Since USA is a major producer of pure zirconium & hafnium metal, it is assumed that USA is also the major producer of zirconium and hafnium tetrachloride.

## Technology
After the production of the zircon sand, it enters the fluidized bed carbochlorinator, where petroleum coke and chlorine gas react with the zircon sand at 1200°C producing bundled zirconium-hafnium-silicon tetrachlorides and carbon monoxide. The stoichiometric equation is the following; ZrSiO4 ,(HfSiO4 ) + 4 Cl2 + 4 C → ZrCl4 + SiCl4 ,(HfCl4 ) + 4 CO. Afterwards, the bundle product is condensed to remove silicon tetrachloride, since it condenses to higher temperatures than Zr-Hf tetrachlorides. The bundled Zr-Hf product condenses and enters the Zr-Hf separation process.
The composition of the bundled product is assumed to be 98.4% ZrCl4 and 1.6% HfCl4. In the extractive distillation process, a counter flow technique with a column of molten salt is utilized for the separation of the chlorides. During 1 hour of operation, 23405.1 kg of bundled Zr-Hf tetrachlorides enter the molten-salt-based column (consisting of NaCl and KCl with 8:29 M) from the top. The bundled chloride dissolve creating a molten salt system (34.0 mol% NaCl and KCl (8:29 M); 66.0 mol% ZrCl4 and HfCl4). From the top of the column the solvents are circulated to the bottom, while the zirconium-hafnium chloride fumes follow the opposite direction. The rising fumes are progressively enriched in hafnium chlorides and are extracted from the top of the column (distillate stream) while the flow going down is enriched producing nuclear-grade zirconium tetrachlorides, which are condensed and extracted from the bottom stream.

## Time period
Data are considered representative of current production practices.

## Parameters
- amount_of_TiCl4_per_kg_of_titanium_sponge: 3.9626 kg; name TiCl4_amount
  The amount of TiCl4 required is based on the stoichiometric equation: TiCl4 + 2Mg -> Ti + 2MgCl2 (reduction and distillation process), which means that for the production of 1 kg of Ti sponge, 3.9626 kg of TiCl4 are needed.
- amount_of_Zr(Hf)Cl4_required_per_kg_of produced_high-purity_ZrCl4: 1.1956 kg; name ZrHfCl4_amount
  23405.5 kg of Zr(Hf)Cl4 (zirconium tetrachloride bundled with hafnium) with a composition of 98.4% ZrCl4 is entering the extractive distillation column. The recovery rate of ZrCl4 is 85% that ends up in the bottom stream after the recovery of the salts in stripper unit, thus producing 19576.36 kg of high-purity ZrCl4. As a result, approximately 1.1956 kg of Zr(Hf)Cl4 is required for the production of 1 kg of high-purity ZrCl4.
  Reference: Minh, L. Q., Long, N. V. D., Duong, P. L. T., Jung, Y., Bahadori, A., & Lee, M. (2015). Design of an Extractive Distillation Column for the Environmentally Benign Separation of Zirconium and Hafnium Tetrachloride for Nuclear Power Reactor Applications. Energies, 8(9), 10354-10369)

## Reference product
- zirconium tetrachloride: 1 kg; name RP1; By-product classification allocatable product; CPC 342: Basic inorganic chemicals n.e.c.; CAS 10026-11-6
  production volume 6.13091e6 kg
    The production volume is expressed in kg. The annual production of zirconium tetrachloride is based on the fact that for the production of 1 kg of zirconium sponge, 2.5545 kg of zirconium tetrachloride are required as input (consult the zirconium sponge production dataset for more information). The US production volume of zirconium sponge is 1600000 kg (Source: https://www.lipmann.co.uk/zirconium). The resulting number has been scaled up by 50% to represent the fact that part of the zirconium tetrachloride and hafnium tetrachloride are commercialized. This scaling is arbitrary, since the fraction that is commercialized and the fraction that is used for the production of sponge are unknown.
  property chlorine content 0.6085
    Chlorine content of Zirconium tetrachloride (ZrCl4) calculated based on the molecular structure. Mass contribution of each element to the total mass: Zr: 39.15% , Cl: 60.85%. Source: https://www.lenntech.com/calculators/molecular/molecular-weight-calculator.htm .
  property hafnium content 2.2292e-5; name RP1_Hf_content; = (40/1000000)*0.5573
    Complete separation of zirconium and hafnium is not possible. According to Minh et al (2015) the content of hafnium tetrachloride (HfCl4) in the high-purity zirconium tetrachloride (ZrCl4) is less than 40 ppm.
    Therefore, the hafnium content in the ZrCl4 is calculated by multiplying the HfCl4 content in ZrCl4 (40 ppm) by the mass contribution of hafnium to the total mass of HfCl4 (55.73% - Source: <https://www.lenntech.com/calculators/molecular/molecular-weight-calculator.htm>).
    Reference : Minh, L. Q., Long, N. V. D., Duong, P. L. T., Jung, Y., Bahadori, A., & Lee, M. (2015). Design of an Extractive Distillation Column for the Environmentally Benign Separation of Zirconium and Hafnium Tetrachloride for Nuclear Power Reactor Applications. Energies, 8(9), 10354-10369.
  property price 4.34111 EUR2005
    Price calculated based on the mass fraction of Zr present in ZrCl4 (39.1%) and the price of zirconium metal. Refer to the exchange "zirconium sponge" for more details about how the price of zirconium was obtained.
  property zirconium content 0.391484; name RP1_Zr_content; = (1-0.00004)*0.3915
    The zirconium content in zirconium tetrachloride (ZrCl4) is calculated by multiplying the purity of ZrCl4 by the mass contribution of zirconium based on the molecular structure of ZrCl4 (39.15% - Source: <https://www.lenntech.com/calculators/molecular/molecular-weight-calculator.htm>). The purity of ZrCl4 is reduced to 99.99996, due to the presence of hafnium tetrachloride (HfCl4) in ZrCl4 (40 ppm, according to Minh et al (2015)).
    Reference : Minh, L. Q., Long, N. V. D., Duong, P. L. T., Jung, Y., Bahadori, A., & Lee, M. (2015). Design of an Extractive Distillation Column for the Environmentally Benign Separation of Zirconium and Hafnium Tetrachloride for Nuclear Power Reactor Applications. Energies, 8(9), 10354-10369.
  properties: carbon allocation 0 kg, carbon content 0, carbon content, fossil 0, carbon content, non-fossil 0, dry mass 1 kg, water content 0, water in wet mass 0 kg, wet mass 1 kg

## Inputs from technosphere
- basic oxygen furnace slag: -1.43026 kg; name bp3; = 1.469131038*(IF(RP1;0.973541476095415) + IF(RP2;0.0264585239045846)); lognormal variance with pedigree 0.0198, pedigree (2,5,4,5,2)
  Due to absence of data for the byproduct during the carbochlorination of zircon (except for the SiCl4 and carbon monoxide emissions), the basic oxygen furnace slag reported in the titanium tetrachloride production dataset is assumed here as the best available representation, since titanium tetrachloride is also produced through the carbochlorination of titanium dioxide (first step of the Kroll process). The amount of basic oxygen furnace slag is based on wet mass balance of the entire process.
  production volume
    Calculated from production volume of reference product using the relative outputs.
  property hafnium content 0.00416332; name bp3_Hf_content
  property zirconium content 0.0523268; name bp3_Zr_content
  properties: aluminium content 0.0101034, calcium content 0.324525, dry mass 0.995 kg, iron content 0.182475, magnesium content 0.0350101, manganese content 0.0250783, oxygen content 0.329259, phosphorus content 0.0102096, silicon content 0.0600014, vanadium content 0.00554358, water content 0.00502513, wet mass 1 kg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
  note on aluminium content: The value of 'aluminium content' is documented in Turner & Symeonidis, 2020. Reference: Turner David & Symeonidis Avraam, 2020, Life cycle inventories of the treatment of iron and steelmaking by-products, ecoinvent association, Zürich, Switzerland
  note on calcium content: The value of 'calcium content' is documented in Turner & Symeonidis, 2020. Reference: Turner David & Symeonidis Avraam, 2020, Life cycle inventories of the treatment of iron and steelmaking by-products, ecoinvent association, Zürich, Switzerland
  note on hafnium content: The hafnium content value is based on hafnium mass balance between inputs and outputs containing hafnium. Due to the hafnium imbalance on the output side (hafnium amount in HfCl4 is smaller than the amount of hafnium amount in zircon sand), it is assumed that the amount of hafnium lost during the process ends up in the basic oxygen furnace slag.
  note on iron content: The value of 'iron content' is documented in Turner & Symeonidis, 2020. Reference: Turner David & Symeonidis Avraam, 2020, Life cycle inventories of the treatment of iron and steelmaking by-products, ecoinvent association, Zürich, Switzerland
  note on magnesium content: The value of 'magnesium content' is documented in Turner & Symeonidis, 2020. Reference: Turner David & Symeonidis Avraam, 2020, Life cycle inventories of the treatment of iron and steelmaking by-products, ecoinvent association, Zürich, Switzerland
  note on manganese content: The value of 'manganese content' is documented in Turner & Symeonidis, 2020. Reference: Turner David & Symeonidis Avraam, 2020, Life cycle inventories of the treatment of iron and steelmaking by-products, ecoinvent association, Zürich, Switzerland
  note on oxygen content: The value of 'oxygen content' is documented in Turner & Symeonidis, 2020. Reference: Turner David & Symeonidis Avraam, 2020, Life cycle inventories of the treatment of iron and steelmaking by-products, ecoinvent association, Zürich, Switzerland
  note on phosphorus content: The value of 'phosphorus content' is documented in Turner & Symeonidis, 2020. Reference: Turner David & Symeonidis Avraam, 2020, Life cycle inventories of the treatment of iron and steelmaking by-products, ecoinvent association, Zürich, Switzerland
  note on silicon content: The value of 'silicon content' is documented in Turner & Symeonidis, 2020. Reference: Turner David & Symeonidis Avraam, 2020, Life cycle inventories of the treatment of iron and steelmaking by-products, ecoinvent association, Zürich, Switzerland
  note on vanadium content: The value of 'vanadium content' is documented in Turner & Symeonidis, 2020. Reference: Turner David & Symeonidis Avraam, 2020, Life cycle inventories of the treatment of iron and steelmaking by-products, ecoinvent association, Zürich, Switzerland
  note on zirconium content: The zirconium content value is based on zirconium mass balance between inputs and outputs containing zirconium. Due to the zirconium imbalance on the output side (zirconium amount in ZrCl4 is smaller than the amount of zirconium amount in zircon sand), it is assumed that the amount of zirconium lost during the process ends up in the basic oxygen furnace slag.
- chemical factory, organics: 3.89417e-10 unit; = 4E-10*(IF(RP1;0.973541476095415) + IF(RP2;0.0264585239045846)); lognormal variance with pedigree 0.3038, pedigree (2,3,1,5,2)
  This infrastructural input has been assumed for compliance with the Ecoinvent Guidelines. The chemical factory is assumed to have an average output of 50'000 t/a and a lifespan of 50 years.
- chlorine, for reuse in zirconium and hafnium tetrachloride production: 0.268374 kg; name recycled_Cl2; = ((0.34543*2.0386/2.5545*1)+(0.34543*1.0419/1.7945*RP2))*(IF(RP1;0.973541476095415) + IF(RP2;0.0264585239045846)); lognormal variance with pedigree 0.006, pedigree (2,4,2,5,2)
  This exchange represents the amount of recycled chlorine - obtained during the electrolysis of magnesium chloride - that is used during the production of 1 kg of zirconium tetrachloride and 0.019091 kg of hafnium tetrachloride.
  The amount of recycled chlorine is calculated based on the following assumptions:
  i) During the production of zirconium and hafnium sponge, 2.0386 and 1.0419 kg of magnesium chloride are produced as a byproduct respectively (consult the datasets ''zirconium sponge production, from zirconium tetrachloride'' & ''hafnium sponge production, from hafnium tetrachloride'' for more information). The abovementioned amounts are sent to the electrolysis process (MgCl2 → Mg + Cl2) in order to obtain magnesium that is fed back to the respective sponge production process and chlorine that is fed back to the zirconium and hafnium tetrachloride production process.
  ii) Based on the respective electrolysis datasets (''electrolysis of magnesium chloride, from zirconium sponge production'' & ''electrolysis of magnesium chloride, from hafnium sponge production''), 0.345552 kg of chlorine per kg of magnesium chloride is recovered. Therefore, the amount of chlorine per kg Zr and Hf sponge is 0.345552*2.0386 and 0.345552*1.0419 respectively.
  iii) Stoichiometrically, 2.5545 kg of ZrCl4 and 1.7945 kg of HfCl4 are required for the production of 1 kg of Zr and Hf sponge respectively.
  properties: dry mass 1 kg, price 0.148 EUR2005, wet mass 1 kg
- chlorine, liquid: 1.15527 kg; name Cl2_make_up; = (1.217*1.1956-recycled_Cl2)*(IF(RP1;0.973541476095415) + IF(RP2;0.0264585239045846)); lognormal variance with pedigree 0.0044, pedigree (2,3,1,5,2)
  This exchange represents the amount of non-recovered Cl2 that must be added separately in order to cover the stoichiometric amount that is required during the zirconium and hafnium tetrachloride production process. The stoichiometric amount of Cl2 is based on the following equation that describes the carbochlorination of Zr(Hf)Cl4 (zirconium tetrachloride bundled with hafnium tetrachloride): Zr(Hf)SiO4 + 4C + 4Cl2 → Zr(Hf)Cl4 + SiCl4 + 4CO, which means that for the production of 1 kg of Zr(Hf)Cl4, 1.217 kg of Cl2 is required as input. This value is multiplied by the amount of Zr(Hf)Cl4 required per kg of ZrCl4 (1.1956 kg - consult the respective parameter), since 1.1956 kg of Zr(Hf)Cl4 is required in the extractive distillation process in order to produce 1 kg of nuclear-grade hafnium-free ZrCl4, according to Minh et al (2015) publication, resulting in 1.455 kg of Cl2 per kg ZrCl4.
  However, approximately 0.2795 kg of Cl2 is recycled (consult ''chlorine, for reuse in zirconium and hafnium tetrachloride production'' exchange comment), meaning that the amount of non-recovered Cl2 is calculated by subtracting the amount of recovered Cl2 (0.2795 kg) from the stoichiometric amount of Cl2 (1.455 kg).
  Finally, the liquid chlorine is assumed as input instead of gaseous, since it is usually transported in liquid form which requires compression that is not considered in the gaseous chlorine exchange.
  Reference: Minh, L. Q., Long, N. V. D., Duong, P. L. T., Jung, Y., Bahadori, A., & Lee, M. (2015). Design of an Extractive Distillation Column for the Environmentally Benign Separation of Zirconium and Hafnium Tetrachloride for Nuclear Power Reactor Applications. Energies, 8(9), 10354-10369).
  properties: dry mass 1 kg, wet mass 1 kg
- electricity, medium voltage: 0.865351 kWh; = (((2550/1000)/TiCl4_amount)*ZrHfCl4_amount+(1117+1222)/19576.36)*(IF(RP1;0.973541476095415) + IF(RP2;0.0264585239045846)); lognormal variance with pedigree 0.006, pedigree (2,4,2,5,2)
  The total electricity consumption is the sum of the electricity consumption during the carbochlorination process and the electricity consumption during the extractive distillation process. For the carbochlorination process the following strategy is applied:
  Due to absence of data for further inputs required during the carbochlorination of zircon, any additional inputs reported in the titanium tetrachloride production dataset are assumed here as the best available representation, since titanium tetrachloride is also produced through the carbochlorination of titanium dioxide (first step of the Kroll process). As a consequence, the description provided below (refering to the production of 1 kg of titanium tetrachloride) represents also the respective inputs during the production of 1 kg of Zr(Hf)Cl4 (zirconium tetrachloride bundled with hafnium tetrachloride). The original value reported is multiplied by the amount of Zr(Hf)Cl4 required per kg of ZrCl4 (1.1956 kg - consult the respective parameter), since 1.1956 kg of Zr(Hf)Cl4 is required in the extractive distillation process in order to produce 1 kg of nuclear-grade hafnium-free ZrCl4, according to Minh et al (2015) publication.
  The original description from the titanium tetrachloride production dataset:
  [The original amount of electricity required in the chlorination and refining process is 2550 kWh and represents the amount required for the production of 1 metric ton of titanium sponge. This value was taken from Table 2 of the Gao et al (2018) publication. This value was adjusted to represent the production of 1 kg of TiCl4 (by dividing by 1000 and by dividing again by 3.9626 based on the fact that for the production of 1 kg of Ti sponge, 3.9626 kg of TiCl4 are needed - TiCl4 + 2Mg → Ti + 2MgCl2 more information on the titanium sponge production dataset about this equation).]
  For the extractive distillation process the following applies: The electricity consumption during the extractive distillation process is the sum of electricity of required in the reboiler (1222 kWh) and the condenser (1117 kWh), assuming 1 hour of operation. The sum is then divided by 19576.36, since 19576.36 kg of purified zirconium tetrachloride are produced during 1 hour of operation. Those values for the extractive distillation process are based in figure 4 of the Minh et al (2015) publication.
  Reference 1: Minh, L. Q., Long, N. V. D., Duong, P. L. T., Jung, Y., Bahadori, A., & Lee, M. (2015). Design of an Extractive Distillation Column for the Environmentally Benign Separation of Zirconium and Hafnium Tetrachloride for Nuclear Power Reactor Applications. Energies, 8(9), 10354-10369.
  Reference 2: Gao, F., Nie, Z., Yang, D., Sun, B., Liu, Y., Gong, X., & Wang, Z. (2018). Environmental impacts analysis of titanium sponge production using Kroll process in China. Journal of Cleaner Production, 174, 771-779. doi:https://doi.org/10.1016/j.jclepro.2017.09.240.
- heat, district or industrial, natural gas: 1.08433 MJ; = (((91.6/1000)/TiCl4_amount)*40.3*ZrHfCl4_amount)*(IF(RP1;0.973541476095415) + IF(RP2;0.0264585239045846)); lognormal variance with pedigree 0.006, pedigree (2,4,2,5,2)
  Due to absence of data for further inputs required during the carbochlorination of zircon, any additional inputs reported in the titanium tetrachloride production dataset are assumed here as the best available representation, since titanium tetrachloride is also produced through the carbochlorination of titanium dioxide (first step of the Kroll process). As a consequence, the description provided below (refering to the production of 1 kg of titanium tetrachloride) represents also the respective inputs during the production of 1 kg of Zr(Hf)Cl4 (zirconium tetrachloride bundled with hafnium tetrachloride). The original value reported is multiplied by the amount of Zr(Hf)Cl4 required per kg of ZrCl4 (1.1956 kg - consult the respective parameter), since 1.1956 kg of Zr(Hf)Cl4 is required in the extractive distillation process in order to produce 1 kg of nuclear-grade hafnium-free ZrCl4, according to Minh et al (2015) publication.
  The original description from the titanium tetrachloride production dataset:
  [The original amount of natural gas amount required in the chlorination and refining process is 91.6 m3 and represents the amount required for the production of 1 metric ton of titanium sponge. This value was taken from the Gao et al (2018) publication. This value was first adjusted to represent the production of 1 kg of TiCl4 (by dividing by 1000 and by dividing again by 3.9626 based on the fact that for the production of 1 kg of Ti sponge, 3.9626 kg of TiCl4 are needed - TiCl4 + 2Mg → Ti + 2MgCl2 - more information on the titanium sponge production dataset about this equation). The gross calorific value of the natural gas is 40.3 MJ/m3, and is taken from the data quality Guidelines of Ecoinvent version 3, page 36.]
  Reference 1: Minh, L. Q., Long, N. V. D., Duong, P. L. T., Jung, Y., Bahadori, A., & Lee, M. (2015). Design of an Extractive Distillation Column for the Environmentally Benign Separation of Zirconium and Hafnium Tetrachloride for Nuclear Power Reactor Applications. Energies, 8(9), 10354-10369.
  Reference 2: Gao, F., Nie, Z., Yang, D., Sun, B., Liu, Y., Gong, X., & Wang, Z. (2018). Environmental impacts analysis of titanium sponge production using Kroll process in China. Journal of Cleaner Production, 174, 771-779. doi:https://doi.org/10.1016/j.jclepro.2017.09.240.
- heat, district or industrial, other than natural gas: 42.9703 MJ; = ((((3530/1000)*30.4+(851/1000)*45.8)/TiCl4_amount)*ZrHfCl4_amount)*(IF(RP1;0.973541476095415) + IF(RP2;0.0264585239045846)); lognormal variance with pedigree 0.006, pedigree (2,4,2,5,2)
  Due to absence of data for further inputs required during the carbochlorination of zircon, any additional inputs reported in the titanium tetrachloride production dataset are assumed here as the best available representation, since titanium tetrachloride is also produced through the carbochlorination of titanium dioxide (first step of the Kroll process). As a consequence, the description provided below (refering to the production of 1 kg of titanium tetrachloride) represents also the respective inputs during the production of 1 kg of Zr(Hf)Cl4 (zirconium tetrachloride bundled with hafnium tetrachloride). The original value reported is multiplied by the amount of Zr(Hf)Cl4 required per kg of ZrCl4 (1.1956 kg - consult the respective parameter), since 1.1956 kg of Zr(Hf)Cl4 is required in the extractive distillation process in order to produce 1 kg of nuclear-grade hafnium-free ZrCl4, according to Minh et al (2015) publication.
  The original description from the titanium tetrachloride production dataset:
  [This exchange represents the amount of heat produced from the combustion of hard coal (3530 kg) and crude oil (851 kg) in the chlorination and refining process for the production of 1 metric ton of titanium sponge. The values in parentheses are taken from Table 2 of the Gao et al (2018) publication. These values were first adjusted to represent the production of 1 kg of TiCl4 (by dividing by 1000 and by diving again by 3.9626 based on the fact that for the production of 1 kg of Ti sponge, 3.9626 kg of TiCl4 are needed - TiCl4 + 2Mg → Ti + 2MgCl2 - more information on the titanium sponge production dataset). Therefore the amounts of hard coal and crude oil required per 1 kg of TiCl4 are 0.890823497 kg and 0.214756599 kg respectively.
  The thermal energy from each source is calculated by multiplying the gross calorific value of each fuel (45.8 MJ/kg for crude oil and 30.4 MJ/kg for hard coal according to Table 5.1, chapter 5.6.3, page 35 of the data quality guidelines of Ecoinvent version 3) with the amount of each fuel as mentioned above. The thermal energies from each source are summed to obtain the reported value.]
  Reference 1: Minh, L. Q., Long, N. V. D., Duong, P. L. T., Jung, Y., Bahadori, A., & Lee, M. (2015). Design of an Extractive Distillation Column for the Environmentally Benign Separation of Zirconium and Hafnium Tetrachloride for Nuclear Power Reactor Applications. Energies, 8(9), 10354-10369.
  Reference 2: Gao, F., Nie, Z., Yang, D., Sun, B., Liu, Y., Gong, X., & Wang, Z. (2018). Environmental impacts analysis of titanium sponge production using Kroll process in China. Journal of Cleaner Production, 174, 771-779. doi:https://doi.org/10.1016/j.jclepro.2017.09.240.
  properties: corresponding fuel use, propane, furnace >100kW 1.05263 MJ
  note on corresponding fuel use, propane, furnace >100kW: Lower heating value of the fuel input related to the heat/electricity output, taken directly from ecoinvent v3.0 dataset "heat production, natural gas, at industrial furnace >100kW, GLO 2000".
- hydrochloric acid, without water, in 30% solution state: -0.0301375 kg; name bp1; = (0.2*((513/1000)/TiCl4_amount)*ZrHfCl4_amount)*(IF(RP1;0.973541476095415) + IF(RP2;0.0264585239045846)); lognormal variance with pedigree 0.006, pedigree (2,4,2,5,2)
  Due to absence of data for the byproduct during the carbochlorination of zircon (except for the SiCl4 and carbon monoxide emissions), the hydrochloric acid reported in the titanium tetrachloride production dataset is assumed here as the best available representation, since titanium tetrachloride is also through the carbochlorination of titanium dioxide (first step of the Kroll process). As a consequence, the description provided below (refering to the production of 1 kg of titanium tetrachloride) represents also the amount of hydrochloric acid during the production of 1 kg of Zr(Hf)Cl4 (zirconium tetrachloride bundled with hafnium tetrachloride). The original value reported is multiplied by the amount of Zr(Hf)Cl4 required per kg of ZrCl4 (1.1956 kg - consult the respective parameter), since 1.1956 kg of Zr(Hf)Cl4 is required in the extractive distillation process in order to produce 1 kg of nuclear-grade hafnium-free ZrCl4, according to the Minh et al (2015) publication.
  The original description from the titanium tetrachloride production dataset is the following:
  [The original amount of hydrochloric acid (20% concentration) produced as a byproduct from the chlorination and refining process is 513 kg and represents the amount of hydrochloric acid (20% concentration) produced per 1 metric ton of titanium sponge. This original value (along with the concentration of the byproduct) is taken from Table 2 of the Gao et al (2018) publication. This value was adjusted to represent the production of 1 kg of TiCl4 (first by dividing by 1000 and by dividing again by 3.9626, based on the fact that for the production of 1 kg of Ti sponge, 3.9626 kg of TiCl4 are needed - TiCl4 + 2Mg → Ti + 2MgCl2 - more information on the titanium sponge production dataset about this equation). Because this Ecoinvent exchange refers to pure hydrochloric acid the value is multiplied by 0.2 to ensure the same purity as the reported byproduct.]
  Reference 1: Minh, L. Q., Long, N. V. D., Duong, P. L. T., Jung, Y., Bahadori, A., & Lee, M. (2015). Design of an Extractive Distillation Column for the Environmentally Benign Separation of Zirconium and Hafnium Tetrachloride for Nuclear Power Reactor Applications. Energies, 8(9), 10354-10369.
  Reference 2: Gao, F., Nie, Z., Yang, D., Sun, B., Liu, Y., Gong, X., & Wang, Z. (2018). Environmental impacts analysis of titanium sponge production using Kroll process in China. Journal of Cleaner Production, 174, 771-779. doi:https://doi.org/10.1016/j.jclepro.2017.09.240.
  production volume
    Calculated from production volume of reference product using the relative outputs.
  properties: dry mass 1 kg, price 0.127 EUR2005, wet mass 1 kg
- low level radioactive waste: -1.85435e-5 m3; name bp4; = ((25032/525675)/2500)*(IF(RP1;0.973541476095415) + IF(RP2;0.0264585239045846)); lognormal variance with pedigree 0.0532, pedigree (3,5,5,5,2)
  This exchange represents the amount of unreacted residue, stemming from the carbochlorination process. during the production of 1 kg of zirconium tetrachloride and 0.019091 kg of hafnium tetrachloride. This residue has been modelled as radioactive waste, because of the presence of involatile, naturally- occurring radionuclides such as radium and thorium. According to the source stated below, for the production of 525675 lb of zirconium tetrachloride, 25032 lb of unreacted residue is generated. The density of this residue is assumed to be the same of the exchange ''low level radioactive waste'' due to absence of data.
  Source: https://patents.google.com/patent/WO1996039359A1/en
  production volume
    Calculated from production volume of reference product using the relative outputs.
  properties: dry mass 2500 kg, wet mass 2500 kg
- petroleum coke: 0.415069 kg; = ((0.20616/0.885)*ZrHfCl4_amount*(1+0.5308))*(IF(RP1;0.973541476095415) + IF(RP2;0.0264585239045846)); lognormal variance with pedigree 0.006, pedigree (2,4,2,5,2)
  The amount of petroleum coke required as an input is calculated based on the following facts:
  i) the stoichiometric equation of the carbochlorination process: Zr(Hf)SiO4 + 4C + 4Cl2 → Zr(Hf)Cl4 + SiCl4 + 4CO, which means that for the production of 1 kg of Zr(Hf)Cl4 (zirconium tetrachloride bundled with hafnium tetrachloride), 0.20616 kg of carbon are required as input.
  ii) 1.1956 kg of Zr(Hf)Cl4 is required in the extractive distillation process in order to produce 1 kg of nuclear-grade hafnium-free ZrCl4, according to the Minh et al (2015) publication.
  iii) the carbon content of petroleum coke is 0.885 (see exchange properties of petroleum coke).
  iv) In the carbochlorination process for titanium sponge production, nearly 53.08% of petroleum coke is added in excess according to Gao et al (2018). Due to lack of data and since Zirconium is produced also through the Kroll process (with the first sub process being the carbochlorination process), it is assumed that the petroleum coke is also added in excess (extra 53.08% of the stoichiometric input).
  Reference 1: Minh, L. Q., Long, N. V. D., Duong, P. L. T., Jung, Y., Bahadori, A., & Lee, M. (2015). Design of an Extractive Distillation Column for the Environmentally Benign Separation of Zirconium and Hafnium Tetrachloride for Nuclear Power Reactor Applications. Energies, 8(9), 10354-10369.
  Reference 2: Gao, F., Nie, Z., Yang, D., Sun, B., Liu, Y., Gong, X., & Wang, Z. (2018). Environmental impacts analysis of titanium sponge production using Kroll process in China. Journal of Cleaner Production, 174, 771-779. doi:https://doi.org/10.1016/j.jclepro.2017.09.240.
  properties: carbon content, fossil 0.885, dry mass 1 kg, wet mass 1 kg
- silicon tetrachloride: -0.848603 kg; name bp2; = (0.729061175*ZrHfCl4_amount)*(IF(RP1;0.973541476095415) + IF(RP2;0.0264585239045846)); lognormal variance with pedigree 0.0034, pedigree (1,3,2,5,1)
  The amount of SiCl4 produced as a byproduct is calculated based on the following facts:
  i) the stoichiometric equation of the carbochlorination process: Zr(Hf)SiO4 + 4C + 4Cl2 → Zr(Hf)Cl4 + SiCl4 + 4CO, which means that for the production of 1 kg of Zr(Hf)Cl4 (zirconium tetrachloride bundled with hafnium tetrachloride), 0.729061 kg of SiCl4 is produced as a byproduct.
  ii) 1.1956 kg of Zr(Hf)Cl4 is required in the extractive distillation process in order to produce 1 kg of nuclear-grade hafnium-free ZrCl4, according to the Minh et al. (2015) publication.
  Reference: Minh, L. Q., Long, N. V. D., Duong, P. L. T., Jung, Y., Bahadori, A., & Lee, M. (2015). Design of an Extractive Distillation Column for the Environmentally Benign Separation of Zirconium and Hafnium Tetrachloride for Nuclear Power Reactor Applications. Energies, 8(9), 10354-10369.
  production volume
    Calculated from production volume of reference product using the relative outputs.
  properties: dry mass 1 kg, price 0.5 EUR2005, wet mass 1 kg
- sodium hydroxide, without water, in 50% solution state: 1.3277 kg; = (((4520/1000)/TiCl4_amount)*ZrHfCl4_amount)*(IF(RP1;0.973541476095415) + IF(RP2;0.0264585239045846)); lognormal variance with pedigree 0.006, pedigree (2,4,2,5,2)
  Due to absence of data for further inputs required during the carbochlorination of zircon, any additional inputs reported in the titanium tetrachloride production dataset are assumed here as the best available representation, since titanium tetrachloride is also produced through the carbochlorination of titanium dioxide (first step of the Kroll process). As a consequence, the description provided below (refering to the production of 1 kg of titanium tetrachloride) represents also the respective inputs during the production of 1 kg of Zr(Hf)Cl4 (zirconium tetrachloride bundled with hafnium tetrachloride). The original value reported is multiplied by the amount of Zr(Hf)Cl4 required per kg of ZrCl4 (1.1956 kg - consult the respective parameter), since 1.1956 kg of Zr(Hf)Cl4 is required in the extractive distillation process in order to produce 1 kg of nuclear-grade hafnium-free ZrCl4, according to Minh et al (2015) publication.
  The original description from the titanium tetrachloride production dataset:
  [The original amount of sodium hydroxide required in the chlorination and refining process is 4520 kg and represents the amount required for the production of 1 metric ton of titanium sponge. This value was taken from Table 2 of the Gao et al (2018) publication. This value was adjusted to represent the production of 1 kg of TiCl4 (by dividing by 1000 and by dividing again by 3.9626 based on the fact that for the production of 1 kg of Ti sponge, 3.9626 kg of TiCl4 are needed - TiCl4 + 2Mg → Ti + 2MgCl2 - more information on the titanium sponge production dataset about this equation).]
  Reference 1: Minh, L. Q., Long, N. V. D., Duong, P. L. T., Jung, Y., Bahadori, A., & Lee, M. (2015). Design of an Extractive Distillation Column for the Environmentally Benign Separation of Zirconium and Hafnium Tetrachloride for Nuclear Power Reactor Applications. Energies, 8(9), 10354-10369.
  Reference 2: Gao, F., Nie, Z., Yang, D., Sun, B., Liu, Y., Gong, X., & Wang, Z. (2018). Environmental impacts analysis of titanium sponge production using Kroll process in China. Journal of Cleaner Production, 174, 771-779. doi:https://doi.org/10.1016/j.jclepro.2017.09.240.
  properties: dry mass 1 kg, wet mass 1 kg
- tap water: 0.129245 kg; = ((440/1000/TiCl4_amount)*ZrHfCl4_amount)*(IF(RP1;0.973541476095415) + IF(RP2;0.0264585239045846)); lognormal variance with pedigree 0.006, pedigree (2,4,2,5,2)
  Due to absence of data for further inputs required during the carbochlorination of zircon, any additional inputs reported in the titanium tetrachloride production dataset are assumed here as the best available representation, since titanium tetrachloride is also produced through the carbochlorination of titanium dioxide (first step of the Kroll process). As a consequence, the description provided below (refering to the production of 1 kg of titanium tetrachloride) represents also the respective inputs during the production of 1 kg of Zr(Hf)Cl4 (zirconium tetrachloride bundled with hafnium tetrachloride). The original value reported is multiplied by the amount of Zr(Hf)Cl4 required per kg of ZrCl4 (1.1956 kg - consult the respective parameter), since 1.1956 kg of Zr(Hf)Cl4 is required in the extractive distillation process in order to produce 1 kg of nuclear-grade hafnium-free ZrCl4, according to Minh et al (2015) publication.
  The original description from the titanium tetrachloride production dataset:
  [The original amount of water required in the chlorination and refining process is 440 kg and represents the amount required for the production of 1 metric ton of titanium sponge. This value was taken from Table 2 of the Gao et al (2018) publication. This value was adjusted to represent the production of 1 kg of TiCl4 (by dividing by 1000 and by dividing again by 3.9626 based on the fact that for the production of 1 kg of Ti sponge, 3.9626 kg of TiCl4 are needed - TiCl4 + 2Mg → Ti + 2MgCl2 - more information on the titanium sponge production dataset about this equation).
  Reference 1: Minh, L. Q., Long, N. V. D., Duong, P. L. T., Jung, Y., Bahadori, A., & Lee, M. (2015). Design of an Extractive Distillation Column for the Environmentally Benign Separation of Zirconium and Hafnium Tetrachloride for Nuclear Power Reactor Applications. Energies, 8(9), 10354-10369.
  Reference 2: Gao, F., Nie, Z., Yang, D., Sun, B., Liu, Y., Gong, X., & Wang, Z. (2018). Environmental impacts analysis of titanium sponge production using Kroll process in China. Journal of Cleaner Production, 174, 771-779. doi:https://doi.org/10.1016/j.jclepro.2017.09.240.
  properties: carbon content, fossil 0.00178991, dry mass 0.000337476 kg, water content 2962.17, wet mass 1 kg
  note on carbon content, fossil: Bicarbonate content is 2.93 mol/m3. CO2 content is 0.1 mol/m3 (ecoinvent v2.2 report 8, Tab 93.1).
- zircon: 0.494414 kg; = 0.54*(0.786604216*ZrHfCl4_amount)*(IF(RP1;0.973541476095415) + IF(RP2;0.0264585239045846)); lognormal variance with pedigree 0.0034, pedigree (1,3,2,5,1)
  This exchange represents the amount of zircon supplied from South Africa that is used for the production of 1 kg of zirconium tetrachloride and 0.019091 kg of hafnium tetrachloride. This amount is calculated by multiplying the total amount of zircon required for the production of 1 kg of zirconium tetrachloride and 0.019091 kg of hafnium tetrachloride by the share of zircon supplied from South Africa (54% - according to USGS).
  The total amount of zircon required as an input is calculated based on the following facts:
  i) the stoichiometric equation of the carbochlorination process: Zr(Hf)SiO4 + 4C + 4Cl2 → Zr(Hf)Cl4 + SiCl4 + 4CO, which means that for the production of 1 kg of Zr(Hf)Cl4 (zirconium tetrachloride bundled with hafnium tetrachloride), 0.786604 kg of zircon are required as input.
  ii) 1.1956 kg of Zr(Hf)Cl4 is required in the extractive distillation process in order to produce 1 kg of nuclear-grade hafnium-free ZrCl4, according to the Minh et al (2015) publication.
  An activity link has been set in order to ensure zircon is supplied from South Africa.
  Reference: Minh, L. Q., Long, N. V. D., Duong, P. L. T., Jung, Y., Bahadori, A., & Lee, M. (2015). Design of an Extractive Distillation Column for the Environmentally Benign Separation of Zirconium and Hafnium Tetrachloride for Nuclear Power Reactor Applications. Energies, 8(9), 10354-10369).
  Source: https://pubs.usgs.gov/periodicals/mcs2022/mcs2022-zirconium-hafnium.pdf
  properties: aluminium content 0.0042344, dry mass 1 kg, hafnium content 0.014, iron content 0.0010491, oxygen content 0.346546, silicon content 0.151938, titanium content 0.0017979, wet mass 1 kg, zirconium content 0.4976
  note on aluminium content: The composition of zircon (except for Zirconium and Hafnium content) is taken from the following report: (Source: http://eastminerals.asia/wp-content/uploads/2018/11/East-Minerals-Zircon-Sand-Standard.pdf), which describes the composition of typical zircon. It contains maximum concentration of compounds in zircon.The calculation of the individual contents of each compound in zircon is based on the subtotal masses of the elements in each compound.The subtotal masses are calculated using the molecular weight calculator. (Source: https://www.lenntech.com/calculators/molecular/molecular-weight-calculator.htm). The maximum content of Al2O3 in zircon is: 0.80%. The subtotal masses of Al2O3 are: Al:52.93%, O:47.08%.
  note on hafnium content: The Hafnium and Zirconium oxide contents (ZrO2 and HfO2) for typical zircon should be minimum 65% (Source: https://www.chemours.com/en/-/media/files/minerals/mineral-zircon-product-info.pdf). The calculation of the hafnium content in zircon is assumed to be 1.4%. The amount has been assumed is such a way in order to ensure i) that the sum of ZrO2 and HfO2 is minimum 65% ii) that no extra hafnium is produced in each product throughout the Hafnium production chain (due to different values contained in literature regarding the hafnium content in zircon). Finally, it should be noted that complete (zirconium-free) hafnium is not possible as there are bundled together. Therefore, the presence of zirconium in hafnium (in ppms) has not been taken into account for simplicity purposes.
  note on iron content: The composition of zircon (except for Zirconium and Hafnium content) is taken from the following report: (Source: http://eastminerals.asia/wp-content/uploads/2018/11/East-Minerals-Zircon-Sand-Standard.pdf), which describes the composition of typical zircon. It contains maximum concentration of compounds in zircon.The calculation of the individual contents of each compound in zircon is based on the subtotal masses of the elements in each compound.The subtotal masses are calculated using the molecular weight calculator. (Source: https://www.lenntech.com/calculators/molecular/molecular-weight-calculator.htm). The maximum content of Fe2O3 in zircon is: 0.15%. The subtotal masses of Fe2O3 are: Fe:69.94%, O:30.06%.
  note on oxygen content: Oxygen content in zircon is calculated as the sum of oxygen contents of each individual compound present (i.e ZrO2, HfO2, SiO2, Al2O3, TiO2 and Fe2O3) in zircon.The oxygen content in each compound is calculated by multiplying the amount of chemical compound content in zircon with the subtotal mass of oxygen in the compound using the molecular weight calculator. (Source: <https://www.lenntech.com/calculators/molecular/molecular-weight-calculator.htm>). The oxygen content of each compound is provided on the properties comment field of the other contained elements.
  note on silicon content: The composition of zircon (except for Zirconium and Hafnium content) is taken from the following report: (Source: http://eastminerals.asia/wp-content/uploads/2018/11/East-Minerals-Zircon-Sand-Standard.pdf), which describes the composition of typical zircon. It contains maximum concentration of compounds in zircon.The calculation of the individual contents of each compound in zircon is based on the subtotal masses of the elements in each compound.The subtotal masses are calculated using the molecular weight calculator. (Source: https://www.lenntech.com/calculators/molecular/molecular-weight-calculator.htm). The maximum content of SiO2 in zircon is: 32.5%. The subtotal masses of SiO2 are: Si:46.75%, O:53.26%.
  note on titanium content: The composition of zircon (except for Zirconium and Hafnium content) is taken from the following report: (Source: http://eastminerals.asia/wp-content/uploads/2018/11/East-Minerals-Zircon-Sand-Standard.pdf), which describes the composition of typical zircon. It contains maximum concentration of compounds in zircon.The calculation of the individual contents of each compound in zircon is based on the subtotal masses of the elements in each compound.The subtotal masses are calculated using the molecular weight calculator. (Source: https://www.lenntech.com/calculators/molecular/molecular-weight-calculator.htm). The maximum content of TiO2 in zircon is: 0.3%. The subtotal masses of TiO2 are: Ti:59.93%, O:40.06%.
  note on zirconium content: The Hafnium and Zirconium oxide contents (ZrO2 and HfO2) for typical zircon should be minimum 65% (Source: https://www.chemours.com/en/-/media/files/minerals/mineral-zircon-product-info.pdf). The calculation of the zircon content in zircon is based on the subtotal masses of the elements of the zircon sand (ZrSiO4).The subtotal masses are calculated using the molecular weight calculator. (Source: https://www.lenntech.com/calculators/molecular/molecular-weight-calculator.htm). The subtotal masses of ZrSiO4 are: Zr:49.76%, Si:15.32%, O:34.91. Finally, it should be noted that complete (hafnium-free) zirconium is not possible as there are bundled together. Therefore, the presence of hafnium in zirconium (in ppms) has not been taken into account for simplicity purposes.
- zircon: 0.247207 kg; = (1-(0.19+0.54))*(0.786604216*ZrHfCl4_amount)*(IF(RP1;0.973541476095415) + IF(RP2;0.0264585239045846)); lognormal variance with pedigree 0.0034, pedigree (1,3,2,5,1)
  This exchange represents the remaining amount of zircon that is not supplied from either South Africa or Australia. This amount is calculated by subtracting the amounts supplied from South Africa and Australia fron the total amount of zircon sand that is required from The amount of zircon supplied fro required as an input is calculated based on the following facts:
  i) the stoichiometric equation of the carbochlorination process: Zr(Hf)SiO4 + 4C + 4Cl2 → Zr(Hf)Cl4 + SiCl4 + 4CO, which means that for the production of 1 kg of Zr(Hf)Cl4 (zirconium tetrachloride bundled with hafnium tetrachloride), 0.786604 kg of zircon are required as input.
  ii) 1.1956 kg of Zr(Hf)Cl4 is required in the extractive distillation process in order to produce 1 kg of nuclear-grade hafnium-free ZrCl4, according to the Minh et al (2015) publication.
  An activity link has been set in order to ensure zircon is supplied from the global producing activity.
  Reference: Minh, L. Q., Long, N. V. D., Duong, P. L. T., Jung, Y., Bahadori, A., & Lee, M. (2015). Design of an Extractive Distillation Column for the Environmentally Benign Separation of Zirconium and Hafnium Tetrachloride for Nuclear Power Reactor Applications. Energies, 8(9), 10354-10369).
- zircon: 0.17396 kg; = 0.19*(0.786604216*ZrHfCl4_amount)*(IF(RP1;0.973541476095415) + IF(RP2;0.0264585239045846)); lognormal variance with pedigree 0.0034, pedigree (1,3,2,5,1)
  This exchange represents the amount of zircon supplied from Australia that is used for the production of 1 kg of zirconium tetrachloride and 0.019091 kg of hafnium tetrachloride. This amount is calculated by multiplying the total amount of zircon required for the production of 1 kg of zirconium tetrachloride and 0.019091 kg of hafnium tetrachloride by the share of zircon supplied from Australia (19% - according to USGS).
  The total amount of zircon required as an input is calculated based on the following facts:
  i) the stoichiometric equation of the carbochlorination process: Zr(Hf)SiO4 + 4C + 4Cl2 → Zr(Hf)Cl4 + SiCl4 + 4CO, which means that for the production of 1 kg of Zr(Hf)Cl4 (zirconium tetrachloride bundled with hafnium tetrachloride), 0.786604 kg of zircon are required as input.
  ii) 1.1956 kg of Zr(Hf)Cl4 is required in the extractive distillation process in order to produce 1 kg of nuclear-grade hafnium-free ZrCl4, according to the Minh et al (2015) publication.
  An activity link has been set in order to ensure zircon is supplied from Australia.
  Reference: Minh, L. Q., Long, N. V. D., Duong, P. L. T., Jung, Y., Bahadori, A., & Lee, M. (2015). Design of an Extractive Distillation Column for the Environmentally Benign Separation of Zirconium and Hafnium Tetrachloride for Nuclear Power Reactor Applications. Energies, 8(9), 10354-10369).
  Source: <https://pubs.usgs.gov/periodicals/mcs2022/mcs2022-zirconium-hafnium.pdf$>

## Emissions to nature
- Carbon monoxide, fossil [air, unspecified]: 0.85665 kg; = 0.879931777*(IF(RP1;0.973541476095415) + IF(RP2;0.0264585239045846)); lognormal variance with pedigree 0.0015, pedigree (1,3,2,3,1)
  This exchange represents the amount of carbon monoxide emissions during the production of 1 kg of zirconium tetrachloride and 0.019091 kg of hafnium tetrachloride. The amount of carbon monoxide emissions is calculated based on carbon balance of the entire process.

## Sampling procedure
For the carbochlorination process of zircon: Due to absence of data for the inputs and outputs during the production of zirconium & hafnium tetrachloride, the inputs and outputs of the titanium tetrachloride production dataset is assumed here as the best available representation, since titanium tetrachloride is also produced through the carbochlorination of titanium slag/ilmenite concentrate (first step of the Kroll process). The inputs and outputs (byproducts & emissions) for the titanium carbochlorination process were taken from the Gao et al. (2018) publication. Exception to this is the input of total zircon and the output of silicon tetrachloride, whose calculation was solely based on the stoichiometric equation that governs the carbochlorination process (Zr(Hf)SiO4 + 4C + 4Cl2 → Zr(Hf)Cl4 + SiCl4 + 4CO). The input of petroleum coke was calculated considering not only the abovementioned stoichiometric equation but also the fact that petroleum coke is added in excess (53.08% - as in the titanium carbochlorination process) to account for the inefficiency in the reaction. Because of this the carbon monoxide emissions were calculated based on carbon balance of the entire process, without considering the stoichiometric reaction of the process.

All the abovementioned exchanges, have been readjusted to correspond to the production of 1 kg of nuclear-grade zirconium tetrachloride, by multiplying by 1.1956, since 1.1956 kg of Zr(Hf)Cl4 is required in the extractive distillation process in order to produce 1 kg of nuclear-grade (hafnium-free) ZrCl4 (for more information consult the individual exchange comments).

In addition, during the production of zirconium & hafnium sponge through the Kroll process, magnesium chloride is produced as a byproduct, which undergoes electrolysis (MgCl2 → Mg + Cl2) in order to obtain Mg that is fed back to the zirconium & hafnium sponge production process and Cl2 that is fed back to the zirconium and hafnium tetrachloride production process. Therefore, there is the recovered chlorine that is reused in this process and the non-recovered amount that is calculated by subtracting the recovered amount from the stoichiometrically required amount (consult the respective exchange comments for analytical calculation).

For the extractive distillation process: All data relevent to the extractive distillation process (electricity consumption, zirconium & hafnium tetrachloride outputs) were taken from the Minh et al. (2015) publication. The sodium & potassium chloride inputs have not been considered because they are recovered from the stripper units at the end of the process and then returned back to the feed storage, thus staying within the boundaries of the system.

Due to the fact that that there are two reference products in this dataset (zirconium & hafnium tetrachloride), subdivision of the exchange amounts between zirconium tetrachloride and the hafnium tetrachloride is required first. This subdivision is based on the shares of metal mass contained in zirconium tetrachloride and hafnium tetrachloride. The zirconium metal mass in zirconium tetrachloride is roughly 0.39148 kg while the hafnium metal mass in hafnium tetrachloride is roughly 0.01064 kg. The resulting fractions for the subdivision are approximately 97.354% and 2.646%, meaning that 97.354% of the exchanges are allocated to zirconium tetrachloride production and the remaining 2.645% are allocated to hafnium tetrachloride production.

Reference 1: Gao, F., Nie, Z., Yang, D., Sun, B., Liu, Y., Gong, X., & Wang, Z. (2018). Environmental impacts analysis of titanium sponge production using Kroll process in China. Journal of Cleaner Production, 174, 771-779. doi:https://doi.org/10.1016/j.jclepro.2017.09.240.

Reference 2: Minh, L. Q., Long, N. V. D., Duong, P. L. T., Jung, Y., Bahadori, A., & Lee, M. (2015). Design of an Extractive Distillation Column for the Environmentally Benign Separation of Zirconium and Hafnium Tetrachloride for Nuclear Power Reactor Applications. Energies, 8(9), 10354-10369.

## Extrapolations
Approximation of the carbochlorination process of zirconium tetrachloride with the carbochlorination process of titanium tetrachloride (for more information about which data were taken from the titanium tetrachloride production process consult the sampling procedure). There are mostly 2 zirconium - hafnium separation processes used around the world: i) liquid-liquid extraction by using methyl isobutyl ketone (MIBK) as solving agent (dominant process in the USA), or extractive distillation with molten potassium chloroaluminate (KAlCl4) (dominant process in France). Due to lack of quantitative information about the inputs and outputs of these processes, data regarding the zirconium - hafnium separation process through extractive distillation by using sodium & potassium chloride was considered here, based on the Minh et al. (2015) publication.The uncertainty has been adjusted accordingly.

Reference: Minh, L. Q., Long, N. V. D., Duong, P. L. T., Jung, Y., Bahadori, A., & Lee, M. (2015). Design of an Extractive Distillation Column for the Environmentally Benign Separation of Zirconium and Hafnium Tetrachloride for Nuclear Power Reactor Applications. Energies, 8(9), 10354-10369.
