# treatment of kitchen and garden biowaste, home composting in heaps and containers

Dataset: EcoSpold 2, unit process
Geography: RoW
Time period: 2014-03-01 to 2022-02-28
Technology level: current
Classification: ISIC rev.4 ecoinvent: 3821:Treatment and disposal of non-hazardous waste
Scenario: Business-as-Usual
System model: Substitution, consequential, long-term
Generated by: Kuch
Published in: ADEME 2015
Database: ecoinvent
isCopyrightProtected: true

## General comment
This home composting inventory refers to 1 kg of biowaste as input. Data represent an average between home composting in heaps and in closed containers, taking into account the turning over the compost. Biowaste is a mixture of kitchen waste and green waste (balance 2:1 by volume).
Kitchen waste consists of peelings, fruits and vegetables cut into pieces, remains of vegetable meal: rice, pasta, bread, eggshells, paper filters, coffee grounds excluding meat and fish.
Green waste consists of leftover clippings and flowers.
The inventory is based on an experiment using 136,5 kg of biowaste (113,1 kg of kitchen waste and 23,4 kg of green waste). The experience lasted 1 year.
58,8 kg of compost were produced.
According to the ADEME study "Enquête nationale sur la gestion domestique des déchets organiques - 2008" 64% of people practicing home composting performs the process composter in heaps and 36% in closed containers.
The composition of kitchen, garden waste and compost are in the report in french "Impact sanitaire et environnementaux du compostage domestique - rapport, ADEME, 2015"
: https://www.ademe.fr/sites/default/files/assets/documents/impact-sanitaire-environnemental-compostage-domestique-201512-rapport-final-partiea.pdf. This inventory represents a mix of different forms of home composting in heaps and containers
Comment on the dry mass (DM) loss: The dry mass (DM) loss for this inventory is lower than for the inventory for home composting of garden waste. This is for the following reasons:
1/ This inventory has actually a mix of kitchen and green waste (used as structurant) in a 1:2 proportion as input. Indeed, mixed waste (kitchen waste + structurant) is less biodegradable than garden waste, because of:
- A difference in composition: green waste (used as structurant) comes from the maintenance of public gardens. Garden waste was a sample taken from the same source (maintenance of public gardens) but only composed of grass cutting and pruning residues, removing more woody types of residues like branches. The objective was to have a garden waste more representative of the waste from domestic gardens. Because of this difference in composition, while kitchen waste alone was more degradable than garden waste, green waste (used as structurant) was less biodegradable than garden waste.
- A difference in the way the waste streams were treated: garden waste was taken fresh while green waste (used as structurant for the composting of kitchen waste) was stored up to 5 weeks before being shredded. Green waste may have started to degrade before being put in the composters / heaps.
2/ For the composting of garden waste, the heap was bigger than for kitchen waste (kitchen waste is less voluminous), consequently the temperature increase was higher for the garden waste experiment.
3/ The inherent uncertainties of the measurement devices and methodology have to be taken into account. In particular:
- While the DM measurement of the compost is quite robust because the compost is quite homogeneous, the DM measurement of the waste streams is more subject to variability because waste streams are more heterogeneous. Also, the DM measurement was done only at certain points in time during the whole campaign. Consequently, the variability of the composition of the waste depending on the season introduces uncertainty.
- DM measurements were done on fresh matter, and kitchen waste was put in the composters directly after being collected while the garden waste (structurant) was stored before being incorporated in the composters on a weekly basis.
4/ There is a certain influence of the external conditions (weather, humidity, etc.), especially for heaps, which are open systems. Regarding perturbations from animals, for heaps, a grid was put around the experimental set up, but this could not prevent birds and worms from withdrawing matter.

## Included activities start
Activity starts with the inclusion of waste in the composter

## Included activities end
Activity ends with the compost produced in home composter

## Geography
Production of home compost refers to the situation in south west France at Pau.

## Technology
The dataset represents the practice of home composting in heaps and in closed containers with biowaste (kitchen waste and green waste), based on data from a composting experiment. The experiment was performed in the south of France starting March 2014, during 1 year. Several practices of turning over the compost are considered for each type of composter (without turning, quarterly, quaterly on the top half of the tank and turning intake).
The online report (in French only) provides details on the experiment (composting practice, measurements and calculation of inventory data).
According to ADEME study:"Enquête nationale sur la gestion domestique des déchets organiques - 2008" for the composting in heaps, 22% of people turn over the compost and 78% do not turn over.
According to ADEME study:"Enquête nationale sur la gestion domestique des déchets organiques - 2008" for the composting in closed containers, 39% of people turn over the compost and 61% do not turn over.

## Time period
Time period corresponds to the duration of the experiment

## Reference product
- biowaste, kitchen and garden waste: -1 kg; By-product classification Waste; CPC 399: Other wastes and scraps
  Experimental data: 136,5 kg of biowaste produce 58,8 kg of compost.
  production volume 4.71304e10 kg
    According to ADEME study : "Enquête nationale sur la gestion domestique des déchets organiques - 2008", page 81, people practicing home composting produce 3,5 million tons of vegetal waste by year in France and 0,62 milion tons of kitchen waste. In the experiment, we have 113,1 kg of kitchen waste (83 % of the total) and 23.4 kg of vegetal waste (17 % of the total). So we have 1,1096 milion tons of kitchen and vegetal waste for FR Production volume.GDP is 2,3% in 2016 so the value for GLO is 48,24 milion tons
  property calcium content 0.039
    % dm (dry mass). Value represents an average between home composting in heaps and in closed containers, taking into account the turning over the compost.
  property carbon content, non-fossil 0.38
    (same comment as for biowaste, kitchen and garden waste)
  property magnesium content 0.0028
    (same comment as for biowaste, kitchen and garden waste)
  property nitrogen content 0.023
    (same comment as for biowaste, kitchen and garden waste)
  property phosphorus content 0.0064
    (same comment as for biowaste, kitchen and garden waste)
  property potassium content 0.022
    (same comment as for biowaste, kitchen and garden waste)
  property price 0 EUR2005
    Waste products are assigned a price of zero as they are assumed to require further treatment.
  property sodium content 0.0023
    (same comment as for biowaste, kitchen and garden waste)
  property sulfur content 0.006
    (same comment as for biowaste, kitchen and garden waste)
  properties: carbon allocation 0.086944 kg, carbon content 0.38, carbon content, fossil 0, dry mass 0.2288 kg, heating value, net 4.29 MJ, water content 3.37, water in wet mass 0.7712 kg, wet mass 1 kg

## Inputs from technosphere
- compost: -0.4306 kg
  Compost mass recovered at the end of the experiment
  production volume
    No data. We calculate the value with the biowaste as a reference
  properties: calcium content 0.1, carbon content, non-fossil 0.25, dry mass 0.4535 kg, magnesium content 0.0073, nitrogen content 0.019, phosphorus content 0.0079, potassium content 0.012, price 0.03 EUR2005, sodium content 0.0012, sulfur content 0.0057, water content 1.20507, wet mass 1 kg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
  note on calcium content: % dm. Measured at the end of the experiment. Value represents an average between home composting in heaps and in closed containers, taking into account the turning over the compost.
- injection moulding: 0.00112 kg; lognormal variance with pedigree 0.01572, pedigree (4,4,3,5,2)
  Assumption: process used for the manufacturing of the composter
- polyethylene, high density, granulate: 0.00112 kg; lognormal variance with pedigree 0.00972, pedigree (3,4,3,5,2)
  The value is a mix of 64 % in heaps and 36 % in closed container. Data is from literature for composter component. Source : Environmental impacts of home composting, 2010, Joan Colón, Julia Martínez-Blanco, Xavier Gabarrell, Adriana Artola,
  Antoni Sánchez , Joan Rieradevall, Xavier Font.
  properties: heating value, net 42.47 MJ
- waste polyethylene: -1.43895e-6, -1.42948e-5, -2.15332e-7, -6.10384e-7, -3.85163e-6, -2.98953e-6, -1.00044e-6, -1.62591e-6, -2.40491e-6, -6.33891e-7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 kg (42 suppliers, which the file names only by identifier); sum of these -0.00112 kg
  production volume
    The value is 0,0012kg for 1kg of biowaste. The flow of biowaste is used as a reference
  properties: heating value, net 42.47 MJ
  note on heating value, net: Value taken from the general comment of the treatment dataset.

## Inputs from nature
- Oxygen [natural resource, in air]: 0.1538 kg; lognormal variance with pedigree 0.1536, pedigree (3,4,3,5,2)
  Calculated from total mass balance

## Emissions to nature
- Ammonia [air, urban air close to ground]: 2.343e-5 kg; lognormal variance with pedigree 0.0072235, pedigree (2,4,3,5,2)
  Conservative assumption: detection threshold
- Carbon dioxide, non-fossil [air, urban air close to ground]: 0.1466 kg; lognormal variance with pedigree 0.1886, pedigree (3,4,3,5,2)
  Calculated from mass balance of carbon
- Dinitrogen monoxide [air, urban air close to ground]: 6.0424e-5 kg; lognormal variance with pedigree 0.0072605, pedigree (2,4,3,5,2)
  Conservative assumption: detection threshold
- Methane, non-fossil [air, urban air close to ground]: 4.69e-5 kg; lognormal variance with pedigree 0.006647, pedigree (1,4,3,5,2)
  Experimental data. Five data from campaigns and one modeled data for one year
- NMVOC, non-methane volatile organic compounds [air, urban air close to ground]: 0.00984 kg; lognormal variance with pedigree 0.0066215, pedigree (1,4,3,5,2)
  Experimental data. Five data from campaigns and one modeled data for one year
- Water [air, urban air close to ground]: 0.00056026 m3; lognormal variance with pedigree 0.0091, pedigree (3,4,3,5,2)
  Calculated from total mass balance

## Sampling procedure
Data comes from on home composting in heaps and in closed container with garden and kitchen biowaste in France (Pau) during one year
