# treatment of spent antifreezer liquid, hazardous waste incineration, with energy recovery

Dataset: EcoSpold 2, unit process
Geography: RoW
Time period: 1997-01-01 to 2022-12-31
Technology level: current
Classification: ISIC rev.4 ecoinvent: 3822:Treatment and disposal of hazardous waste
Synonyms: mixture of aqueous solutions of 1,2-ethanediol and 1,2-propanediol; mixture of aqueous solutions of EG and PG; mixture of aqueous solutions of ethylene glycol and propylene glycol
Tags: ConvertedDataset; Treatment
Scenario: Business-as-Usual
System model: Substitution, consequential, long-term
Share of production covered: 39 %
Generated by: Gabor Doka (obsolete)
Published in: Doka G. 2008
Database: ecoinvent
isCopyrightProtected: true

## General comment
Inventoried waste contains 100% Anti-Freeze liquid; . waste composition (wet, in ppm): upper heating value 10.92 MJ/kg; lower heating value 0.5551 MJ/kg; H2O 518000; O 225500; H 48800; C 207900; S n.a.; N n.a.; P n.a.; B n.a.; Cl n.a.; Br n.a.; F n.a.; I n.a.; Ag n.a.; As n.a.; Ba n.a.; Cd n.a.; Co n.a.; Cr n.a.; Cu n.a.; Hg n.a.; Mn n.a.; Mo n.a.; Ni n.a.; Pb n.a.; Sb n.a.; Se n.a.; Sn n.a.; V n.a.; Zn n.a.; Be n.a.; Sc n.a.; Sr n.a.; Ti n.a.; Tl n.a.; W n.a.; Si n.a.; Fe n.a.; Ca n.a.; Al n.a.; K n.a.; Mg n.a.; Na n.a.; Share of carbon in waste that is biogenic 0%. Net energy produced in HWI: 17.11MJ/kg thermal energy and 1.27MJ/kg electric energy. Allocation of energy production: no substitution or expansion. 100% of burden allocated to waste disposal function of HWI. One kg of this waste produces 0.002287 kg of residues, which are landfilled. Additional solidification with 0.0009147 kg of cement.

## Included activities end
waste-specific air and water emissions from incineration, auxiliary material consumption for flue gas cleaning. Short-term emissions to river water and long-term emissions to ground water from residual material landfill (from solidified fly ashes and scrubber slugde). Process energy demands for HWI.

## Geography
Specific to the technology encountered in Switzerland in 2000. Well applicable to modern incineration practices in Europe or North America or Japan.

## Technology
Swiss HWI plant in 2000 with wet flue gas scrubber and low-dust SCR DeNOx facility. Gross thermal efficiency 74.4% and gross electric efficiency 10%.

## Time period
Transfer coefficients for modern Swiss MSWI. Emission speciation based on early 90ies data.

## Parameters
- fraction, process water, to air: 1 dimensionless; lognormal variance with pedigree 0.092025, pedigree (4,4,3,2,4)

## Reference product
- spent antifreezer liquid: -1 kg; name RP; By-product classification Waste; CPC 39920: Sewage sludge
  production volume 3.96633 kg
    This is a placeholder value that does not reflect real-world production volumes. This dataset does not currently require a real-world production volume to work in the database framework, and no actual data were collected yet. This has no negative effect on the results of the ecoinvent database.
  property carbon content, fossil 0.431328
    Tab A.7, ecoinvent v2.2 report 13_I. C content has been calculated after data in the tables, and then referred to 1 kg DM
  property heating value, net 0.56 MJ
    Value taken from the general comment of the treatment dataset.
  property price 0 EUR2005
    Waste products are assigned a price of zero as they are assumed to require further treatment.
  properties: carbon allocation 0.2079 kg, carbon content 0.431328, carbon content, non-fossil 0, dry mass 0.482 kg, water content 1.07469, water in wet mass 0.518 kg, wet mass 1 kg

## Inputs from technosphere
- cement, unspecified: 1.20239e-5, 1.97307e-5, 7.49323e-5, 9.31777e-7, 1.85191e-6, 2.83125e-6, 0.000754609, 2.35204e-6, 4.53975e-5 kg (9 suppliers, which the file names only by identifier); sum of these 0.00091466 kg; lognormal variance with pedigree 0.122, pedigree (1,1,5,5,1)
  Cement for solidification of landfilled residual material. Uncertainty calculated from unertainty of the waste composition of this waste, of transfer coefficients in the incinerator and of the solidification recipe.
  properties: dry mass 1 kg, wet mass 1 kg
- chemical, inorganic: 6.6716e-5 kg; lognormal variance with pedigree 0.142, pedigree (1,1,5,5,1)
  Proxy for Polyelectrolyte. uncertainty calculated from uncertainty in average auxiliary material input, and the unertainty of the waste composition of this waste
  properties: carbon content, fossil 0.003, dry mass 1 kg, wet mass 1 kg
  note on carbon content, fossil: This dataset is an unweighted average of 20 inorganic substances (listed in Tab 88.1, ecoinvent v2.2 report 8, part II), being part of the top100 chemicals included in this database. The C-content has also been calculated as an unweighted average of the C content of the substances composing this dataset.
- electricity, medium voltage: -0.0301911, -0.020916, -0.00112109, -0.0303808, -0.249097, -0.0011296, -0.00559069, -0.014352 kWh (8 suppliers, which the file names only by identifier); sum of these -0.352778 kWh; lognormal variance with pedigree 0.122, pedigree (1,1,1,5,1)
  production volume
    Calculated based on the production volume of the reference product.
  properties: price 0.1 EUR2005
- hazardous waste incineration facility: 1.25e-9 unit; lognormal variance with pedigree 0.042, pedigree (1,1,5,5,1)
  demands per kilogram waste. uncertainty is heeded in the module
- heat, central or small-scale, other than natural gas: 21.0983 MJ; lognormal variance with pedigree 0.092, pedigree (1,1,5,5,1)
  Uncertainty dependent on total energy required and heating value present, using experimental GSd for substraction from uc=A*GSDa^2-B
  properties: heating value, net 1 MJ
- heat, district or industrial, other than natural gas: -14.1813, -0.0247632, -2.90389 MJ (3 suppliers, which the file names only by identifier); sum of these -17.11 MJ; lognormal variance with pedigree 0.122, pedigree (1,1,1,5,1)
  production volume
    Calculated based on the production volume of the reference product.
  properties: heating value, net 1 MJ, price 0.0106 EUR2005
- hydrochloric acid, without water, in 30% solution state: 4.003e-5 kg; lognormal variance with pedigree 0.142, pedigree (1,1,5,5,1)
  uncertainty calculated from uncertainty in average auxiliary material input, and the unertainty of the waste composition of this waste
  properties: dry mass 1 kg, heating value, net 3.32 MJ, wet mass 1 kg
- process-specific burdens, hazardous waste incineration plant: 1 kg; lognormal variance with pedigree 0.042, pedigree (1,1,5,5,1)
  demands per kilogram waste. uncertainty is heeded in the module
- process-specific burdens, residual material landfill: 0.000646849, 0.00163985 kg (2 suppliers, which the file names only by identifier); sum of these 0.0022867 kg; lognormal variance with pedigree 0.112, pedigree (1,1,5,5,1)
  uncertainty is calculated from uncertainties in waste composition and transfer coefficients in incinerator
- residual material landfill: 4.7639e-12 unit; lognormal variance with pedigree 0.112, pedigree (1,1,5,5,1)
  (same comment as for process-specific burdens, residual material landfill)
- waste cement, hydrated: -0.000646849, -0.00163985 kg (2 suppliers, which the file names only by identifier); sum of these -0.0022867 kg; lognormal variance with pedigree 0.082, pedigree (1,1,1,5,1)
  Hydrated cement for solidification of landfilled residual material. Uncertainty calculated from unertainty of the waste composition of this waste and transfer coefficients in the incinerator and of the solidification recipe.
  production volume
    Calculated from the production volume of spent antifreezer liquid, 51.8% water in proportion to the respective output amounts.
  properties: dry mass 1 kg, wet mass 1 kg

## Emissions to nature
- Carbon dioxide, fossil [air, urban air close to ground]: 0.75388 kg; lognormal variance with pedigree 0.102, pedigree (1,1,5,5,1)
  calculated from uncertainty in carbon in waste and transfer coefficients
- Carbon monoxide, fossil [air, urban air close to ground]: 1.2076e-5 kg; lognormal variance with pedigree 0.712, pedigree (1,4,5,5,3)
  1 plant for waste solvent incineration in Switzerland
  Uncertainty: & basic uncertainty of 5; 1 plant for waste solvent incineration in Switzerland
- Water [air, unspecified]: 0.000518 m3; name water_to_air_unspecified; lognormal variance with pedigree 0.0827, pedigree (2,2,5,5,1)
  Calculated value based on water balance.
  property carbon content, fossil 0; name C_content_fossil
  property carbon content, non-fossil 0; name C_content_non_fossil
  property fraction, origin: fresh water 0; name fraction_origin_fresh_water
  property fraction, origin: salt water 0; name fraction_origin_salt_water
  property fraction, origin: unspecified 1; name fraction_origin_unspecified
  property water in wet mass 1000 kg; name WWM
- BOD5, Biological Oxygen Demand [water, ground-, long-term]: 0.0033777 kg; lognormal variance with pedigree 0.162, pedigree (1,1,5,5,1)
  Long-term emissions from landfilling of incineration residues. uncertainty is calculated from uncertainties in waste composition and transfer coefficients in incinerator and landfills.
- BOD5, Biological Oxygen Demand [water, surface water]: 1.0446e-5 kg; lognormal variance with pedigree 0.382, pedigree (1,1,5,5,1)
  uncertainty is calculated from uncertainties in waste composition and transfer coefficients in incinerator and landfills
- COD, Chemical Oxygen Demand [water, ground-, long-term]: 0.0033777 kg; lognormal variance with pedigree 0.162, pedigree (1,1,5,5,1)
  (same comment as for BOD5, Biological Oxygen Demand)
- COD, Chemical Oxygen Demand [water, surface water]: 1.0446e-5 kg; lognormal variance with pedigree 0.382, pedigree (1,1,5,5,1)
  (same comment as for BOD5, Biological Oxygen Demand)
- DOC, Dissolved Organic Carbon [water, ground-, long-term]: 0.0014778 kg; lognormal variance with pedigree 0.162, pedigree (1,1,5,5,1)
  (same comment as for BOD5, Biological Oxygen Demand)
- DOC, Dissolved Organic Carbon [water, surface water]: 4.5703e-6 kg; lognormal variance with pedigree 0.382, pedigree (1,1,5,5,1)
  (same comment as for BOD5, Biological Oxygen Demand)
- TOC, Total Organic Carbon [water, ground-, long-term]: 0.0014778 kg; lognormal variance with pedigree 0.162, pedigree (1,1,5,5,1)
  (same comment as for BOD5, Biological Oxygen Demand)
- TOC, Total Organic Carbon [water, surface water]: 4.5703e-6 kg; lognormal variance with pedigree 0.382, pedigree (1,1,5,5,1)
  (same comment as for BOD5, Biological Oxygen Demand)

## Sampling procedure
The 2 Swiss HWI plants, used as the inventory reference technology mix, have a total annual capacity of 53'000 tons of hazardous waste. This corresponds to 39% of the Swiss total installed capacity in 2000. Swiss average plants size is 20'000 t/a.

## Extrapolations
Available waste composition data. Transfer coefficients from one modern HWI completed with data from MSWI. Waste-specific auxiliary material consumption adapted from MSWI. This dataset has been copied from an original dataset covering the geography CH. The uncertainty has been adjusted accordingly.
