# weaned calves production on pasture

Dataset: EcoSpold 2, unit process
Geography: RoW
Time period: 2006-01-01 to 2022-12-31
Technology level: current
Classification: ISIC rev.4 ecoinvent: 0141:Raising of cattle and buffaloes
Scenario: Business-as-Usual
System model: Substitution, consequential, long-term
Share of production covered: 3 %
Generated by: Fernando Dias
Published in: Folegatti-Matsuura M. 2018
Database: ecoinvent
isCopyrightProtected: true

## General comment
This dataset was built as a weighted average of regional datasets of the same activityName. Weights are based on production volumes.
BR: production volume = 6.18e+08 kg/year, weight = 0.5998
ZA: production volume = 4.12e+08 kg/year, weight = 0.4002

## Included activities start
This activity starts at the replanting of pasture.

## Included activities end
This activity ends with the provision of weaned calves at farm gate, ready to be sent to slaughterhouses as live weight.

## Geography
This dataset is a weighted average built from the following geographies: BR, ZA.

## Technology
Pasture is regularly fertilized and replanted every 20 years. Mineral salt is served as supplement feed for all cattle in troughs on the field. Besides pasture and mineral salt, no suplement is served to cattle. The dataset does not include pharmaceuticals, although typical production systems use them. Use of hormones for cattle raising is forbidden in Brazil.

## Time period
Time period of the most of the data collected for this dataset.

## Reference product
- weaned calves, live weight: 1 kg; By-product classification allocatable product; CPC 02111: Cattle; EcoSpold01Categories agricultural production/animal production
  production volume 3.99127e9 kg
    Calculated from cattle for slaughtering production volume.
  property price 1.835 EUR2005
    Calculated as an average of the regional prices (ZA and BR) which were provided by the data providers for the specific countries.
  properties: carbon allocation 0.29568 kg, carbon content 0.4928, carbon content, fossil 0, carbon content, non-fossil 0.4928, dry mass 0.6 kg, energy content 14.937 MJ, water content 0.66667, water in wet mass 0.4 kg, wet mass 1 kg

## Inputs from technosphere
- cattle for slaughtering, live weight: -0.908656 kg
  production volume
    (GLO beef production in 2015) * (% of system in GLO in 2015) * (1 - % beef production from milk cattle in GLO) / (carcass as live weight, GLO average)
  properties: carbon content, non-fossil 0.4928, dry mass 0.6 kg, energy content 14.9367 MJ, price 2.025 EUR2005, water content 0.666667, wet mass 1 kg
  note on carbon content, non-fossil: Calculated from live weight empty body composition in fat and protein ( Johnson, I.R. et al. (2012). J. Anim. Sci. 90(13):4741-475 ; Williams, C.B. (2005). J. Anim. Sci. 83(6):1262-1266) and from C content of nutrients (protein, fat) according to A.D. Kay and T. Vrede ('Evolutionary and Biochemical Aspects', in Global Ecology, 2010, Elsevier B.V., S.E. Jørgensen Ed.).
  note on energy content: Energy content calculated from animal fat and protein composition and energy content for animal fat and protein of 39.3 and 23.6 MJ/kg, respectively. Johnson, I.R. et al. (2012). J. Anim. Sci. 90(13):4741-475. Williams, C.B. (2005). J. Anim. Sci. 83(6):1262-1266.
- fertilising, by broadcaster: 0.00100341 ha; lognormal variance with pedigree 0.0458, pedigree (3,3,5,5,2)
- inorganic phosphorus fertiliser, as P2O5: 0.00163504, 0.000778913, 0.000991013, 0.000255853, 6.55528e-5, 0.000553036, 0.0183188, 0.00112151, 0.000512917, 3.66369e-5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 kg (28 suppliers, which the file names only by identifier); sum of these 0.127063 kg; lognormal variance with pedigree 0.0458, pedigree (3,3,5,5,2)
  properties: dry mass 1 kg, wet mass 1 kg
- inorganic potassium fertiliser, as K2O: 0.00249879, 0.000286403, 3.41598e-6, 0.00881288, 0.00030654, 0.000112907, 1.65406e-5, 0.000209813, 0.000262491, 4.77339e-5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 kg (28 suppliers, which the file names only by identifier); sum of these 0.0602024 kg; lognormal variance with pedigree 0.0458, pedigree (3,3,5,5,2)
  properties: dry mass 1 kg, wet mass 1 kg
- iron scrap, unsorted: -0.00179707 kg
  production volume
    Calculated from production volume of reference product using the relative outputs.
  properties: dry mass 1 kg, price 0.149 EUR2005, wet mass 1 kg
- lime: 0.121152, 1.38394 kg (2 suppliers, which the file names only by identifier); sum of these 1.50509 kg; lognormal variance with pedigree 0.0458, pedigree (3,3,5,5,2)
  properties: carbon content, fossil 0.120005, dry mass 1 kg, wet mass 1 kg
- limestone and gypsum application, by spreader: 0.00100341 ha; lognormal variance with pedigree 0.0458, pedigree (3,3,5,5,2)
- maize grain: 0.0598172 kg; lognormal variance with pedigree 0.0438, pedigree (2,3,5,5,1)
  properties: carbon content, non-fossil 0.46957, dry mass 0.86 kg, water content 0.162791, wet mass 1 kg
- mineral supplement, for beef cattle: 0.348341 kg; lognormal variance with pedigree 0.0458, pedigree (3,3,5,5,2)
  properties: dry mass 1 kg, wet mass 1 kg
- molasses, from sugar beet: 0.0795788 kg; lognormal variance with pedigree 0.0438, pedigree (2,3,5,5,1)
  properties: carbon content, non-fossil 0.39592, dry mass 0.82 kg, water content 0.219512, wet mass 1 kg
- sawlog and veneer log, eucalyptus ssp., measured as solid wood under bark: 7.14914e-10, 1.01876e-7 m3 (2 suppliers, which the file names only by identifier); sum of these 1.02591e-7 m3; lognormal variance with pedigree 0.0458, pedigree (3,3,5,5,2)
  properties: carbon content, non-fossil 0.494, dry mass 825 kg, heating value, net 11336.5 MJ, water content 0.5, wet mass 1237.5 kg
- sodium chloride, powder: 0.181545 kg; lognormal variance with pedigree 0.0438, pedigree (2,3,5,5,1)
  properties: dry mass 1 kg, wet mass 1 kg
- sowing: 0.00100341 ha; lognormal variance with pedigree 0.0458, pedigree (3,3,5,5,2)
- sulfur: 0.00249322 kg; lognormal variance with pedigree 0.0438, pedigree (2,3,5,5,1)
  properties: dry mass 1 kg, wet mass 1 kg
- tillage, harrowing, by offset disc harrow: 0.00100341 ha; lognormal variance with pedigree 0.0458, pedigree (3,3,5,5,2)
- tillage, harrowing, by offset leveling disc harrow: 0.00200683 ha; lognormal variance with pedigree 0.0458, pedigree (3,3,5,5,2)
- transport, tractor and trailer, agricultural: 0.00103731, 0.255088 metric ton*km (2 suppliers, which the file names only by identifier); sum of these 0.256125 metric ton*km; lognormal variance with pedigree 0.1632, pedigree (2,3,5,5,1)
- urea: 0.00632393, 0.0500026, 0.0426987, 0.00783957 kg (4 suppliers, which the file names only by identifier); sum of these 0.106865 kg; lognormal variance with pedigree 0.0438, pedigree (2,3,5,5,1)
  The exchange has been updated from 'urea, as N' into 'urea' and therefore its amount has been scaled (multiplied) from 0.0498 kg by 2.1438 kg of 'urea' per kg of 'urea, as N'.
  properties: carbon content, fossil 0.2, dry mass 1 kg, wet mass 1 kg
- waste wood pole, chrome preserved: -1.88948e-6, -0.000125066 kg (2 suppliers, which the file names only by identifier); sum of these -0.000126956 kg
  production volume
    Calculated from production volume of reference product using the relative outputs.
  properties: carbon content, non-fossil 0.483676, dry mass 0.8 kg, heating value, net 13.99 MJ, water content 0.25, wet mass 1 kg
  note on heating value, net: Value taken from the general comment of the treatment dataset.
- weaned heifers, live weight: -0.317493 kg
  production volume
    Calculated from cattle for slaughtering production volume.
  properties: carbon content, non-fossil 0.4928, dry mass 0.6 kg, price 1.64 EUR2005, water content 0.666667, wet mass 1 kg
- weed control, by brush cutter, pasture: 0.00602024 ha; lognormal variance with pedigree 0.0458, pedigree (3,3,5,5,2)
- wire drawing, steel: 0.00179707 kg; lognormal variance with pedigree 0.0458, pedigree (3,3,5,5,2)
- wood preservation, vacuum pressure method, inorganic salt, containing Cr, outdoor use, ground contact: 8.8945e-5 kg; lognormal variance with pedigree 0.0458, pedigree (3,3,5,5,2)
- zinc coat, pieces: 0.000426779 m2; lognormal variance with pedigree 0.0458, pedigree (3,3,5,5,2)

## Inputs from nature
- Energy, gross calorific value, in biomass [natural resource, biotic]: 23.4961 MJ; lognormal variance with pedigree 0.0458, pedigree (3,3,5,5,2)
- Occupation, grassland, natural, for livestock grazing [natural resource, land]: 116.457 m2*year; lognormal variance with pedigree 0.0452, pedigree (2,3,5,5,1)
- Occupation, pasture, man made [natural resource, land]: 200.683 m2*year; lognormal variance with pedigree 0.0472, pedigree (3,3,5,5,2)
- Transformation, from grassland, natural, for livestock grazing [natural resource, land]: 141.669 m2; lognormal variance with pedigree 0.0512, pedigree (2,3,5,5,1)
- Transformation, from pasture, man made [natural resource, land]: 10.0341 m2; lognormal variance with pedigree 0.0532, pedigree (3,3,5,5,2)
- Transformation, to grassland, natural, for livestock grazing [natural resource, land]: 141.669 m2; lognormal variance with pedigree 0.0512, pedigree (2,3,5,5,1)
- Transformation, to pasture, man made [natural resource, land]: 10.0341 m2; lognormal variance with pedigree 0.0532, pedigree (3,3,5,5,2)
- Water, unspecified natural origin [natural resource, in ground]: 0.0564275 m3; lognormal variance with pedigree 0.0438, pedigree (2,3,5,5,1)
- Water, unspecified natural origin [natural resource, in water]: 0.353542 m3; lognormal variance with pedigree 0.0458, pedigree (3,3,5,5,2)

## Emissions to nature
- Ammonia [air, non-urban air or from high stacks]: 0.138982 kg; lognormal variance with pedigree 0.0532, pedigree (3,3,5,5,2)
- Carbon dioxide, fossil [air, non-urban air or from high stacks]: 0.717426 kg; lognormal variance with pedigree 0.0458, pedigree (3,3,5,5,2)
- Dinitrogen monoxide [air, non-urban air or from high stacks]: 0.0444368 kg; lognormal variance with pedigree 0.0752, pedigree (3,3,5,5,2)
- Methane, non-fossil [air, non-urban air or from high stacks]: 1.21652 kg; lognormal variance with pedigree 0.0532, pedigree (3,3,5,5,2)
- Nitrogen oxides [air, non-urban air or from high stacks]: 0.008593 kg; lognormal variance with pedigree 0.0752, pedigree (3,3,5,5,2)
- Water [air, unspecified]: 0.0614954 m3; lognormal variance with pedigree 0.0458, pedigree (3,3,5,5,2)
- Cadmium II [soil, agricultural]: 0.000630456 kg; lognormal variance with pedigree 0.0965, pedigree (3,3,5,5,2)
- Chromium III [soil, agricultural]: 0.00527129 kg; lognormal variance with pedigree 0.0965, pedigree (3,3,5,5,2)
- Copper ion [soil, agricultural]: 0.0414138 kg; lognormal variance with pedigree 0.0965, pedigree (3,3,5,5,2)
- Lead II [soil, agricultural]: 0.00580527 kg; lognormal variance with pedigree 0.0965, pedigree (3,3,5,5,2)
- Mercury II [soil, agricultural]: 3.49371e-7 kg; lognormal variance with pedigree 0.0832, pedigree (2,3,5,5,1)
- Nickel II [soil, agricultural]: 0.00814907 kg; lognormal variance with pedigree 0.0965, pedigree (3,3,5,5,2)
- Zinc II [soil, agricultural]: 0.190666 kg; lognormal variance with pedigree 0.0965, pedigree (3,3,5,5,2)
- Cadmium II [water, surface water]: 7.59198e-8 kg; lognormal variance with pedigree 0.1465, pedigree (3,3,5,5,2)
- Chromium III [water, surface water]: 2.19774e-5 kg; lognormal variance with pedigree 0.1465, pedigree (3,3,5,5,2)
- Copper ion [water, surface water]: 2.55511e-5 kg; lognormal variance with pedigree 0.1465, pedigree (3,3,5,5,2)
- Lead II [water, surface water]: 7.02263e-7 kg; lognormal variance with pedigree 0.1465, pedigree (3,3,5,5,2)
- Mercury II [water, surface water]: 6.7633e-9 kg; lognormal variance with pedigree 0.1332, pedigree (2,3,5,5,1)
- Nickel II [water, surface water]: 8.14535e-7 kg
- Nitrate [water, ground-]: 1.09155 kg; lognormal variance with pedigree 0.0458, pedigree (3,3,5,5,2)
- Phosphate [water, surface water]: 0.00672328 kg; lognormal variance with pedigree 0.0832, pedigree (2,3,5,5,1)
- Phosphorus [water, surface water]: 0.0139445 kg; lognormal variance with pedigree 0.0852, pedigree (3,3,5,5,2)
- Water [water, surface water]: 0.348474 m3; lognormal variance with pedigree 0.0458, pedigree (3,3,5,5,2)
- Zinc II [water, surface water]: 5.94773e-5 kg; lognormal variance with pedigree 0.1465, pedigree (3,3,5,5,2)

## Sampling procedure
Weighted average of Brazilian and South african data.

## Extrapolations
Carbon content, water and gross calorific value are based on ecoinvent database.
