# sheep production, for wool

Dataset: EcoSpold 2, unit process
Geography: US
Time period: 2001-01-01 to 2022-12-31
Technology level: current
Classification: EcoSpold01Categories: agricultural production/animal production
Classification: ISIC rev.4 ecoinvent: 0144:Raising of sheep and goats
Scenario: Business-as-Usual
System model: Substitution, consequential, long-term
Share of production covered: 99 %
Generated by: Bo Weidema
Published in: Nemecek, T. 2007
Database: ecoinvent
isCopyrightProtected: true

## General comment
This unit process represents average sheep production for wool with the outputs of 4.2 kg of sheep fleece in the grease and a by-product of 7.85 kg of sheep for slaughtering, live weight and (average output of husbandry of one sheep during one year). This dataset is a copy dataset from the respective US geography and therefore might not represent fully the global situation.
[This dataset was already contained in the ecoinvent database version 2. It was not individually updated during the transfer to ecoinvent version 3. Life Cycle Impact Assessment results may still have changed, as they are affected by changes in the supply chain, i.e. in other datasets. This dataset was generated following the ecoinvent quality guidelines for version 2. It may have been subject to central changes described in the ecoinvent version 3 change report (http://www.ecoinvent.org/database/ecoinvent-version-3/reports-of-changes/), and the results of the central updates were reviewed extensively. The changes added e.g. consistent water flows and other information throughout the database. The documentation of this dataset can be found in the ecoinvent reports of version 2, which are still available via the ecoinvent website. The change report linked above covers all central changes that were made during the conversion process.]
[This dataset is meant to replace the following datasets:]

## Included activities start
This activity represents the expenditures and emissions of the husbandry of 1 sheep during 1 year. It includes the processes and inputs of sheep husbandry on pasture land (20% intensive and 80% extensive pasture land). Inputs of fertilisers, feedstuffs, pesticides and irrigation are considered.

## Included activities end
Machine infrastructure and a shed for machine sheltering and shearing is included. The direct emissions on the field are also included. The system boundary is at the farm gate. The products of sheep husbandry are wool and sheep live weight. All further processes after the farm gate like transport to the slaughterhouse, slaughtering, cooling, etc. are excluded.

## Geography
Refers to an average production in the USA

## Technology
Conventional production typical for the country. Water for irrigation is pumped from 48 meter depth by electric pumps.

## Time period
The yield data have been collected for the years 2001-2006.

## Parameters
- fraction, irrigation water to surface water: 0.2 dimensionless; name fraction_IW_to_surface_water; lognormal variance with pedigree 0.0886, pedigree (4,3,1,1,4)
  Literature value (Döll, 2011) cross referenced with expert opinion.
- fraction, irrigation water, to air: 0.694898 dimensionless; name fraction_IW_to_air; lognormal variance with pedigree 0.0409, pedigree (2,2,2,1,1)
  Literature value (Siebert, 2010) (Vionnet, S., Quantis Water Database - Technical Report, 2012).
- fraction, irrigation water, to ground water: 0.8 dimensionless; name fraction_IW_to_ground_water; lognormal variance with pedigree 0.0886, pedigree (4,3,1,1,4)
  Literature value (Döll, 2011) cross referenced with expert opinion.

## Reference product
- sheep fleece in the grease: 1 kg; By-product classification allocatable product; CPC 02942: Pulled wool, greasy, including fleece-washed pulled wool; coarse animal hair
  EcoSpold01Location=US
  Original value as reported in ecoinvent v2 report No 15.
  production volume 1.31547e7 kg
    Wool, greasy, 2005 in FAOSTAT (accessed 2011.05.23) minus 22% produced by meat sheep. Fits well with an average annual fleece production per wool sheep: 5072000 pieces of fleece per year, at an average fleece weight of 3.3 kg (NASS 2007) and a total number of 4041600 wool sheep (calculated as the sum of non-slaughtered sheep + 1/8 of all slaughtered sheep (assuming life expectancy of wool sheep of 8 years)). --- Source for total heads of sheep and fleece production: NASS - National Agricultural Statistics Service 2007, retrieved 2 Feb 2007 from http://www.nass.usda.gov. --- Source for number of slaughtered sheep per year: NASS 2000, retrieved 2 Feb 2007 from http://usda.mannlib.cornell.edu/usda/nass/LiveSlau/2000s/2000/LiveSlau-11-22-2000.pdf. --- Source of life expectancy of wool sheep and meat sheep (8 and 1 years, respectively): National Renewable Energy Laboratory (2006) U.S. Life-Cycle Inventory Database. Retrieved 30 June 2006 from http://hpb-1a.nrel.gov/lci.
  property carbon content, non-fossil 0.53
    wool is composed by keratin (proteins). C content in proteins is considered to be 53% ("Evolutionary and Biochemical Aspects", A.D. Kay and T. Vrede (in Global Ecology, 2010, Elsevier B.V., S.E. Jørgensen Ed.).)
  property price 2.82 EUR2005
    Temporary price data. Calculated as 90% of purchasers price based on: 2005 import values of Wool, greasy for the World+ divided by import volumes, according to FAOSTAT (accessed 2011.06.23)
  properties: carbon allocation 0.46087 kg, carbon content 0.53, carbon content, fossil 0, dry mass 0.869565 kg, water content 0.15, water in wet mass 0.130435 kg, wet mass 1 kg

## Inputs from technosphere
- ammonium nitrate: 0.942034 kg; lognormal variance with pedigree 0.0513, pedigree (2,3,5,3,1)
  EcoSpold01Location=RER
  The exchange has been updated from 'ammonium nitrate, as N' into 'ammonium nitrate' and therefore its amount has been scaled (multiplied) from 1.37 kg by 2.8573 kg of 'ammonium nitrate' per kg of 'ammonium nitrate, as N'. Original comment of the exchange is: Value from NREL (2006) assumes only intensive pastures. According to Wells et. al (2000) 80% of sheep pastures are extensive (with reduced or no cultivation). Value from NREL (2006) is multiplied by 0.2 in order to account for the share of extensive pastures. --- Source: Wells A., Gegner L.E. & Earles R. 2000. Sustainable Sheep Production - Livestock Production Guide, Appropriate Technology Transfer for Rural Areas (ATTRA), retrieved 6.6.2007 from http://www.attra.ncat.org/attra-pub/PDF/sheep.pdf
  properties: dry mass 1 kg, wet mass 1 kg
- fertilising, by broadcaster: 0.0155749 ha; lognormal variance with pedigree 0.0546, pedigree (3,3,5,5,1)
  EcoSpold01Location=CH
  Value from Nemecek et al. (2004) represents intensive pastures. According to Wells et. al (2000) 80% of sheep pastures are extensive (with reduced or no cultivation). Value from Nemecek et al. (2004) is multiplied by 0.2 in order to account for the share of extensive pastures and divided by stocking density (12.4 sheep per hectare according to AVNA 2007). --- Sources: Wells A., Gegner L.E. & Earles R. 2000. Sustainable Sheep Production - Livestock Production Guide, Appropriate Technology Transfer for Rural Areas (ATTRA), retrieved 6.6.2007 from http://www.attra.ncat.org/attra-pub/PDF/sheep.pdf ---- AVNA - American Veterinary Naturopathic Association (2007) Forage Needs for Meat Goats and Sheep. Retrieved on 25 June 2007 from http://avna.us/14.htm.
- inorganic phosphorus fertiliser, as P2O5: 0.109737 kg; lognormal variance with pedigree 0.0513, pedigree (2,3,5,3,1)
  EcoSpold01Location=RER
  Value from NREL (2006) assumes only intensive pastures. According to Wells et. al (2000) 80% of sheep pastures are extensive (with reduced or no cultivation). Value from NREL (2006) is multiplied by 0.2 in order to account for the share of extensive pastures. --- Source: Wells A., Gegner L.E. & Earles R. 2000. Sustainable Sheep Production - Livestock Production Guide, Appropriate Technology Transfer for Rural Areas (ATTRA), retrieved 6.6.2007 from http://www.attra.ncat.org/attra-pub/PDF/sheep.pdf
  properties: dry mass 1 kg, wet mass 1 kg
- irrigation: 0.824614 m3; name water_irrigation_input; lognormal variance with pedigree 0.0546, pedigree (3,3,5,5,1)
  EcoSpold01Location=US
  Average irrigation of irrigated and non-irrigated pastures; calculations based on USDA (2004) for irrigation volumes and on NCFAP (1997) for pasture land area. --- Sources: USDA - United States Department of Agriculture (2004). 2002 Census of Agriculture - Farm and Ranch Irrigation Survey 2003, Volume 3, Special Studies Part 1. --- NCFAP - National Centre for Food & Agricultural Policy (1997) National Pesticide Use Database 1997. Retrieved on 10 Jan 2007 from http://www.ncfap.org/database/national/default.asp.
  properties: dry mass 0.11 kg, water content 9089.91, wet mass 1000 kg
- lime: 4.39428 kg; lognormal variance with pedigree 0.0513, pedigree (2,3,5,3,1)
  EcoSpold01Location=CH
  Value from NREL (2006) assumes only intensive pastures. According to Wells et. al (2000) 80% of sheep pastures are extensive (with reduced or no cultivation). Value from NREL (2006) is multiplied by 0.2 in order to account for the share of extensive pastures. --- Source: Wells A., Gegner L.E. & Earles R. 2000. Sustainable Sheep Production - Livestock Production Guide, Appropriate Technology Transfer for Rural Areas (ATTRA), retrieved 6.6.2007 from http://www.attra.ncat.org/attra-pub/PDF/sheep.pdf
  properties: carbon content, fossil 0.120005, dry mass 1 kg, wet mass 1 kg
- lime, packed: 1.59311 kg; lognormal variance with pedigree 0.0513, pedigree (2,3,5,3,1)
  For nutrition
  EcoSpold01Location=CH
  properties: carbon content, fossil 0.117492, dry mass 0.998 kg, water content 0.00200401, wet mass 1 kg
  note on carbon content, fossil: Table 3.1, ecoinvent v2.2 report 7, part VII, pg 3. MW CaCO3=100, MW MgCO3=84
- maize grain: 9.96294 kg; lognormal variance with pedigree 0.0513, pedigree (2,3,5,3,1)
  properties: carbon content, non-fossil 0.46957, dry mass 0.86 kg, water content 0.162791, wet mass 1 kg
- potassium chloride: 0.261315 kg; lognormal variance with pedigree 0.0513, pedigree (2,3,5,3,1)
  The exchange has been updated from 'potassium chloride, as K2O' into 'potassium chloride' and therefore its amount has been scaled (multiplied) from 0.686 kg by 1.5829 kg of 'potassium chloride' per kg of 'potassium chloride, as K2O'. Original comment of the exchange is: Value from NREL (2006) assumes only intensive pastures. According to Wells et. al (2000) 80% of sheep pastures are extensive (with reduced or no cultivation). Value from NREL (2006) is multiplied by 0.2 in order to account for the share of extensive pastures. --- Source: Wells A., Gegner L.E. & Earles R. 2000. Sustainable Sheep Production - Livestock Production Guide, Appropriate Technology Transfer for Rural Areas (ATTRA), retrieved 6.6.2007 from http://www.attra.ncat.org/attra-pub/PDF/sheep.pdf
  EcoSpold01Location=RER
  properties: dry mass 1 kg, wet mass 1 kg
- shed: 0.00962603 m2; lognormal variance with pedigree 0.0546, pedigree (3,3,5,5,1)
  EcoSpold01Location=CH
- sheep for slaughtering, live weight: -1.88911 kg; = 62.8/8
  Calculated value from the original weight of an alive sheep divided by 8 years which represents an average lifespan of a wool sheep. Values reported in ecoinvent v2 report No 15.
  production volume
    US produced 84'820 metric ton of sheep meat (carcass weight) in 2005 (FAOSTAT, accessed 2011.05.23). Conversion factor 2 to live weight based on information in ecoinvent v2 report 15. 22% is estimated to be produced as by-product from wool sheep, calculated as the population of wool sheep divided by the total sheep population and a lifetime of 8 years for wool sheep.
  properties: carbon content, non-fossil 0.4375, dry mass 0.5 kg, price 1.85 EUR2005, water content 1, wet mass 1 kg
- sodium chloride, powder: 0.933725 kg; lognormal variance with pedigree 0.0513, pedigree (2,3,5,3,1)
  EcoSpold01Location=RER
  For nutrition
  properties: dry mass 1 kg, wet mass 1 kg
- soybean meal: 6.5457 kg; lognormal variance with pedigree 0.0513, pedigree (2,3,5,3,1)
  EcoSpold01Location=US
  properties: carbon content, non-fossil 0.475627, dry mass 0.89 kg, water content 0.123596, wet mass 1 kg
  note on carbon content, non-fossil: Composition data obtained from Table 2 in Uses of Canola Meal, J. Bonnardeaux, Department of Agriculture and Food, Western Australia, 2007. First, composition data were refered to 1 kg dry mass. Then, C-contents were calculated considering a C-content/dry mass of 46% in carbohydrates (including fibres), 53% in proteins and 75% in fats. All data from "Evolutionary and Biochemical Aspects", A.D. Kay and T. Vrede (in Global Ecology, 2010, Elsevier B.V., S.E. Jørgensen Ed.).
- tillage, rolling: 0.00389373 ha; lognormal variance with pedigree 0.0546, pedigree (3,3,5,5,1)
  (same comment as for fertilising, by broadcaster)

## Inputs from nature
- Occupation, pasture, man made [natural resource, land]: 194.686 m2*year; lognormal variance with pedigree 0.1727, pedigree (3,3,5,3,1)
- Transformation, from pasture, man made [natural resource, land]: 194.686 m2; lognormal variance with pedigree 0.1727, pedigree (3,3,5,3,1)
- Transformation, to pasture, man made [natural resource, land]: 194.686 m2; lognormal variance with pedigree 0.1727, pedigree (3,3,5,3,1)

## Emissions to nature
- Ammonia [air, non-urban air or from high stacks]: 0.826683 kg; lognormal variance with pedigree 0.0513, pedigree (2,3,5,3,1)
  Emissions from enteric fermentation and manure according to Taipale (2006). Emissions from fertilisers according to Goolsby (1999). --- Sources: Taipale C., 2006 Colorado 2002 Ammonia Emission Inventory. Colorado Department of Public Health & Environment. --- Goolsby D.A., Battaglin W.A., Lawrence G.B., Artz R.S., Aulenbach B.T., Hooper R.P., Keeney D.R. & Stensland G.J. (1999) Flux and Sources of Nutrients in the Mississippi-Atchafalaya River Basin - Topic 3 Report for the integrated Assessment on Hypoxia in the Gulf of Mexico. Decision Analysis Series No. 17, National Oceanic and Atmospheric Administration, U.S. Department of Commerce, p. 159.
- Dinitrogen monoxide [air, non-urban air or from high stacks]: 0.0619026 kg; lognormal variance with pedigree 0.0708, pedigree (2,2,5,3,1)
  Emissions from fertilisers according to Nemecek et al. (2004). Emissions from manure according to EPA (2006). Sources: Environmental Protection Agency (EPA), (2006) US Emissions Inventory 2006 - INVENTORY OF U.S. GREENHOUSE GAS EMISSIONS AND SINKS: 1990-2004, retrieved on 10 Jan 2007 from http://yosemite.epa.gov/oar/globalwarming.nsf/content/ResourceCenterPublicationsGHGEmissionsUSEmissionsInventory2006.html.
- Methane, non-fossil [air, non-urban air or from high stacks]: 2.08637 kg; lognormal variance with pedigree 0.0708, pedigree (2,2,5,3,1)
  Emissions from enteric fermentation and manure according to EPA (2006). Sources: Environmental Protection Agency (EPA), (2006) US Emissions Inventory 2006 - INVENTORY OF U.S. GREENHOUSE GAS EMISSIONS AND SINKS: 1990-2004, retrieved on 10 Jan 2007 from http://yosemite.epa.gov/oar/globalwarming.nsf/content/ResourceCenterPublicationsGHGEmissionsUSEmissionsInventory2006.html.
- Nitrogen oxides [air, non-urban air or from high stacks]: 0.0129997 kg; lognormal variance with pedigree 0.0708, pedigree (2,2,5,3,1)
- Water [air, unspecified]: 0.573022 m3; name water_to_air_unspecified; = water_irrigation_input*fraction_IW_to_air; lognormal variance with pedigree 0.0807, pedigree (2,2,5,1,1)
  Calculated value based on literature values and expert opinion. See comments in the parametres' comment field.
  property fraction, origin: fresh water 1; name fraction_origin_fresh_water
  property fraction, origin: salt water 0; name fraction_origin_salt_water
  property fraction, origin: unspecified 0; name fraction_origin_unspecified
- Cadmium II [soil, agricultural]: -3.90071e-9 kg
  Original value. Should be adjusted to reflect the lower output of wool sheep.
- Chromium III [soil, agricultural]: -2.1828e-5 kg
  Original value. Should be adjusted to reflect the lower output of wool sheep.
- Copper ion [soil, agricultural]: -1.81335e-5 kg
  Original value. Should be adjusted to reflect the lower output of wool sheep.
- Lead II [soil, agricultural]: -4.36998e-8 kg
  Original value. Should be adjusted to reflect the lower output of wool sheep.
- Nickel II [soil, agricultural]: -3.24012e-6 kg
  Original value. Should be adjusted to reflect the lower output of wool sheep.
- Zinc II [soil, agricultural]: -4.04654e-5 kg
  Original value. Should be adjusted to reflect the lower output of wool sheep.
- Cadmium II [water, ground-]: 3.81696e-10 kg; lognormal variance with pedigree 0.1327, pedigree (2,2,5,5,1)
  Original value. Should be adjusted to reflect the lower output of wool sheep.
- Cadmium II [water, surface water]: 8.86004e-9 kg; lognormal variance with pedigree 0.1327, pedigree (2,2,5,5,1)
  Original value. Should be adjusted to reflect the lower output of wool sheep.
- Chromium III [water, ground-]: 3.45165e-6 kg; lognormal variance with pedigree 0.1327, pedigree (2,2,5,5,1)
  Original value. Should be adjusted to reflect the lower output of wool sheep.
- Chromium III [water, surface water]: 1.89755e-5 kg; lognormal variance with pedigree 0.1327, pedigree (2,2,5,5,1)
  Original value. Should be adjusted to reflect the lower output of wool sheep.
- Copper ion [water, ground-]: 6.62752e-7 kg; lognormal variance with pedigree 0.1327, pedigree (2,2,5,5,1)
  Original value. Should be adjusted to reflect the lower output of wool sheep.
- Copper ion [water, surface water]: 1.78948e-5 kg; lognormal variance with pedigree 0.1327, pedigree (2,2,5,5,1)
  Original value. Should be adjusted to reflect the lower output of wool sheep.
- Lead II [water, ground-]: 3.44058e-10 kg; lognormal variance with pedigree 0.1327, pedigree (2,2,5,5,1)
  Original value. Should be adjusted to reflect the lower output of wool sheep.
- Lead II [water, surface water]: 5.40742e-8 kg; lognormal variance with pedigree 0.1327, pedigree (2,2,5,5,1)
  Original value. Should be adjusted to reflect the lower output of wool sheep.
- Nickel II [water, surface water]: 3.83958e-6 kg; lognormal variance with pedigree 0.1327, pedigree (2,2,5,5,1)
  Original value. Should be adjusted to reflect the lower output of wool sheep.
- Nitrate [water, ground-]: 1.19389 kg; lognormal variance with pedigree 0.0808, pedigree (2,2,5,3,1)
  Calculated after Goolsby et al. (1999): emission factor of 61% of the N-input (fertilisers and N fixation). Originally estimated for the nitrate leaching in the Mississipi region. Extrapolated to the whole USA.
- Phosphate [water, ground-]: 0.014439 kg; lognormal variance with pedigree 0.0808, pedigree (2,2,5,3,1)
- Phosphate [water, surface water]: 0.0154587 kg; lognormal variance with pedigree 0.0808, pedigree (2,2,5,3,1)
  Calculated according to Goolsby et al. (1999) and Litke (999). --- Sources: Litke, D.W. (1999) Review of Phosphorus Control Measures in the United States and Their Effects on Water Quality. Water-Resources Investigations Report 99-4007, U.S. GEOLOGICAL SURVEY, Denver, Colorado.
- Phosphorus [water, surface water]: 0.0114401 kg; lognormal variance with pedigree 0.0808, pedigree (2,2,5,3,1)
  (same comment as for Phosphate)
- Water [water, ground-]: 0.201273 m3; name water_to_water_ground; = water_irrigation_input*(1-fraction_IW_to_air)*fraction_IW_to_ground_water; lognormal variance with pedigree 0.1286, pedigree (4,3,5,1,4)
  Calculated value. See the parameters and their comments to understand the calculation.
  property fraction, origin: fresh water 1; name fraction_origin_fresh_water_Wgw
  property fraction, origin: salt water 0; name fraction_origin_salt_water_Wgw
  property fraction, origin: unspecified 0; name fraction_origin_unspecified_Wgw
- Water [water, surface water]: 0.0503183 m3; name water_to_water_surface; = water_irrigation_input*(1-fraction_IW_to_air)*fraction_IW_to_surface_water; lognormal variance with pedigree 0.1286, pedigree (4,3,5,1,4)
  Calculated value. See the parameters and their comments to understand the calculation.
  property fraction, origin: fresh water 1; name fraction_origin_fresh_water_Wsw
  property fraction, origin: salt water 0; name fraction_origin_salt_water_Wsw
- Zinc II [water, ground-]: 7.28378e-6 kg; lognormal variance with pedigree 0.1327, pedigree (2,2,5,5,1)
  Original value. Should be adjusted to reflect the lower output of wool sheep.
- Zinc II [water, surface water]: 5.29432e-5 kg; lognormal variance with pedigree 0.1327, pedigree (2,2,5,5,1)
  Original value. Should be adjusted to reflect the lower output of wool sheep.

## Sampling procedure
Data come from the NREL database and from varoius U.S database. Data were compiled from statistics, literature, farm survey reports, documents from extension services, and expert knowledge.
