# hake, capture by trawler and landing whole, fresh

Dataset: EcoSpold 2, unit process
Time period: 2011-01-01 to 2022-12-31
Technology level: current
Classification: ISIC rev.4 ecoinvent: 0311:Marine fishing
Scenario: Business-as-Usual
System model: Substitution, consequential, long-term
Generated by: Ian Vázquez-Rowe
Published in: Avadí, A. 2018
Database: ecoinvent
isCopyrightProtected: true

## General comment
This activity represents capture and landing of Cape hake (Merluccius capensis) by trawlers in the Southeast Atlantic, more specifically, in the EEZ of Namibia (FAO Areas 47, 48, 49 and 50). The vessels modelled in this dataset are industrial vessels with a beam of 50 m. The gear is bottom trawling. All the three modelled vessels are from Spain, but operating permanently in Namibian waters.
System boundaries and relation between activities

## Included activities start
From the vessel use (including landing) and maintenance phases, including all upstream activities

## Included activities end
Port operations and post-landing processing activities are beyond the system boundary.

## Allocation
The system is unallocated between hake landings and the by-catch

## Geography
Cape hake (Merluccius capensis) captured and landed off the coast of Namibia in FAO Areas 47, 48, 49 and 50.

## Technology
Bottom trawling, fish conservation with cooling chambers.

## Time period
Data corresponds to the landings by four vessels in 2011.

## Parameters
- annual landings per vessel: 1.68496e6 kg; name landings_vessel_year; triangular min 388941, mostLikely 1.26443e6, max 3.40151e6, pedigree (1,4,1,1,1)
  Amount of landings per vessel per year
- average_weight_ trawler: 665000 kg; name WeightTrawler; triangular min 588104, mostLikely 658400, max 748496, pedigree (4,2,3,2,2)
  Average weight of trawler in a given fishery.
- lifetime: 60 year; lognormal variance with pedigree 0.310725, pedigree (4,2,3,2,2)
  Lifetime for vessels with dimensions above 45 meters (beam)
- marine fuel use efficiency: 370 kg; name FUE; triangular min 222, mostLikely 370, max 518, pedigree (2,4,1,1,1)
  Amount of marine fuel consumed per landed unit of fish. Kilograms per tonne of landed fish.
- net calorific value: 42.7 MJ/kg; name net_cal_value; triangular min 41.6275, mostLikely 42.9346, max 43.5379, pedigree (3,5,3,5,5)
  Net calorific value of marine diesel oil (MDO)

## Reference product
- landed hake, fresh: 1 kg; name landed; source Ian Vázquez-Rowe 2014; By-product classification allocatable product; CPC 04241: Wild fish of Gadiformes, live, fresh or chilled; lognormal variance with pedigree 0.0006, pedigree (1,1,1,1,1)
  Whole fresh chilled Namibian hake landed.
  Uncertainty: Data based on reports by skippers
  production volume 4.807e6 kg
    4807 metric tons of hake (Merluccius capensis) landed by Spanish vessels in Namibia. Average reported for the period 2007-2011.
  property ash content 0.013 kg; name hake_ash
    http://frida.fooddata.dk/ShowFood.php?foodid=475
  property carbon content, non-fossil 0.457294; name landed_C_content_non_fossil; = (1-hake_protein-landed_fat_content-hake_ash)*0.444+hake_protein*0.535+landed_fat_content*0.774
    Calculated from C_content = polysaccharids*0.444+protein*0.535+lipids*0.774 and polysaccharids = 1-(protein+lipids+ash)
  property dry mass 0.54945 kg; name landed_DM
  property energy content 4.3 MJ; name landed_energy_content
    Data for Peruvian hake
  property fat content 0.012; name landed_fat_content
    Data for Peruvian hake
  property price 1.17 EUR2005
    Literature value. Avadí, A., & Fréon, P. (2015). A set of sustainability performance indicators for seafood: Direct human consumption products from Peruvian anchoveta fisheries and freshwater aquaculture. Ecological Indicators, 48, 518–532. https://doi.org/10.1016/j.ecolind.2014.09.006
  property protein content 0.166; name hake_protein
    Data for Peruvian hake
  property water content 0.82; name landed_water_content
  properties: carbon allocation 0.25126 kg, carbon content 0.457294, water in wet mass 0.45055 kg, wet mass 1 kg

## Inputs from technosphere
All rows: source Ian Vázquez-Rowe 2014
- antifouling paint emissions: -0.0001344 kg; name antif; lognormal variance with pedigree 0.044, pedigree (3,1,3,1,1)
  Mass of solids from antifouling paint emitted to ocean.
  Uncertainty: Data based on reports by the area of maintenance of the fishing companies
  production volume
    Calculated from production volume of reference product using the relative outputs.
  properties: dry mass 1 kg, wet mass 1 kg
- demersal fish, fresh: -0.12 kg; name bycatch; lognormal variance with pedigree 0.0046, pedigree (3,1,3,1,1)
  Atlantinc ocean demersal biomass removed from ocean in Namibian waters.
  Uncertainty: Data based on reports by skippers
  production volume
    6% of hake landings
  property ash content 0.015 kg; name hakebc_ash
  property carbon content, non-fossil 0.466681; name bycatch_C_content_non_fossil; = (1-hakebc_protein-bycatch_fat_content-hakebc_ash)*0.444+hakebc_protein*0.535+bycatch_fat_content*0.774
  property dry mass 0.56397 kg; name bycatch_DM
  property energy content 3.914 MJ; name bycatch_energy_content
  property fat content 0.039; name bycatch_fat_content
  property protein content 0.181; name hakebc_protein
  property water content 0.77316; name bycatch_water_content
  properties: price 0.539258 EUR2005, wet mass 1 kg
  note on ash content: Ash content of fish is between 1-2% of the edible portion, http://www.fao.org/wairdocs/tan/x5916e/x5916e01.htm
  note on carbon content, non-fossil: Calculated from C_content = polysaccharids*0.444+protein*0.535+lipids*0.774 and polysaccharids = 1-(protein+lipids+ash)
  note on energy content: Average of 15 demersal fish species, http://www.fao.org/wairdocs/tan/x5916e/x5916e01.htm
- diesel, burned in fishing vessel: 17.6949 MJ; = FUE*net_cal_value*1.12; lognormal variance with pedigree 0.0426, pedigree (3,1,5,1,1)
  Combustion of diesel in marine engines. Average diesel use and combustion used for all energy needs onboard
  Uncertainty: Data based on reports by skippers
- lubricating oil: 0.000896 kg; name oil; lognormal variance with pedigree 0.082, pedigree (3,1,5,1,1)
  Lubricating oil for vessel engines.
  Uncertainty: Data based on reports by the area of maintenance of the fishing companies
  properties: carbon content, fossil 0.75, dry mass 1 kg, heating value, net 40.2 MJ, wet mass 1 kg
  note on carbon content, fossil: Lubricating oil is produced from diesel. C-content/dry mass of fats and oils considered 75%, from: ecoinvent v2.2 report, n 15a, pg 40
  note on heating value, net: Literature value, Source: IPCC 2006, 2006 IPCC Guidelines for National Greenhouse Gas Inventories, Prepared by the National Greenhouse Gas Inventories Programme, Eggleston H.S., Buendia L., Miwa K., Ngara T. and Tanabe K. (eds). Published: IGES, Japan
- trawler maintenance, steel: 0.0147343 kg; = (WeightTrawler/(landings_vessel_year*lifetime)*1120); lognormal variance with pedigree 0.342, pedigree (3,1,5,1,1)
  Maintenance of a trawler, per 1000 kg of light ship weight (LSW) over 35 years lifetime. Regressions based on mainly primary data were created to relate the weight of each inventory item to a trawler's LSW. The list of inventory items (granularity) contribute >95% of environmental impacts, as described in the reference publication.
  Uncertainty: Data based on reports by skippers
- trawler, steel: 0.0147343 kg; = (WeightTrawler/(landings_vessel_year*lifetime)*1120); lognormal variance with pedigree 0.342, pedigree (3,1,5,1,1)
  Construction of a trawler, per 1000 kg of light ship weight (LSW). Regressions based on mainly primary data were created to relate the weight of each inventory item to a trawler's LSW. The list of inventory items (granularity) contribute >95% of environmental impacts, as described in the reference publication.
  Uncertainty: Data based on reports by skippers
  properties: lifetime 30 year, lifetime capacity [h] 48000 hour
- waste mineral oil: -0.000896 kg; name woil; = oil; lognormal variance with pedigree 0.044, pedigree (3,1,3,1,1)
  Waste oil landed in port.
  Uncertainty: Data based on reports by the fishing companies
  production volume
    Production volume for waste mineral oil in hake-landng vessels is based on GDP, considering the high variability in efficiency of vessels.
  properties: carbon content, fossil 0.864444, dry mass 0.9 kg, heating value, net 34.7 MJ, water content 0.111111, wet mass 1 kg
  note on carbon content, fossil: Tab A.6, ecoinvent v2.2 report 13_I. C content has been calculated after data in the tables, and then referred to 1 kg DM
  note on heating value, net: Value taken from the general comment of the treatment dataset.

## Inputs from nature
- Fish, demersal, in ocean [natural resource, biotic]: 1.244 kg; = landed+bycatch+discards; source Ian Vázquez-Rowe 2014; lognormal variance with pedigree 0.0426, pedigree (3,1,5,1,1)
  Namibian hake (TL = 4.4 ± 0.6) and bycatch biomass removed from ocean.
  Uncertainty: Data based on reports by skippers
  property ash content 0.015 kg; name fishd_ash
  property fat content 0.039; name fishd_fat
  property protein content 0.181; name fishd_protein

## Emissions to nature
- Methane, chlorodifluoro-, HCFC-22 [air, non-urban air or from high stacks]: 0.0003808 kg; source Ian Vázquez-Rowe 2014; lognormal variance with pedigree 0.082, pedigree (3,1,5,1,1)
  Amount of cooling agents emiited to air.
  Uncertainty: Data based on reports by the fishing companies
- Discarded fish, demersal, to ocean [water, ocean]: 0.124 kg; name discards; source Ian Vázquez-Rowe 2014; lognormal variance with pedigree 0.0426, pedigree (3,1,5,1,1)
  Fish caught and discarded to ocean.
  Uncertainty: Data based on reports by skippers
  property ash content 0.015 kg; name discardsd_ash
  property carbon content, non-fossil 0.466681; name discards_C_content_non_fossil; = (1-discardsd_protein-discards_fat_content-discardsd_ash)*0.444+discardsd_protein*0.535+discards_fat_content*0.774
  property dry mass 0.56397 kg; name discards_DM
  property energy content 3.914 MJ; name discards_energy_content
  property fat content 0.039; name discards_fat_content
  property protein content 0.181; name discardsd_protein
  property water content 0.77316; name discards_water_content
  property water in wet mass 0.43603 kg; name discards_WWM
  property wet mass 1 kg; name discards_WM

## Sampling procedure
4 vessels in 2011. No feasible data on the size of the fleet.

## Extrapolations
The use of these data is probably also valid for other industrial hake fisheries along the southern African coast.
