# treatment of sewage sludge, 97% water, WWT, WW, average, landfarming

Dataset: EcoSpold 2, unit process
Geography: CH
Time period: 2000-01-01 to 2022-12-31
Technology level: current
Classification: ISIC rev.4 ecoinvent: 3821:Treatment and disposal of non-hazardous waste
Scenario: Business-as-Usual
System model: Substitution, consequential, long-term
Generated by: Nikolia Stoikou
Database: ecoinvent
isCopyrightProtected: true

## General comment
The process represents the treatment of a waste (sewage sludge) that is exclusively produced from another waste treatment. Recommended use of this dataset: to be used within the specific chain of treatments for 'wastewater, average'. Share of biogenic carbon in the sludge: 97.43%.

## Included activities start
The activity starts with the waste being available for landfarming. Collection and transportation of the waste to this process is not included.

## Included activities end
The activity ends with the waste being treated and waste-specific emissions from the landfarming process are released to the environment (air, water and soil). The activity is considering local fate of emissions and the initial specific wastewater composition (generating the sewage sludge). Further, it includes provision of fertiliser functions for N, P, K, if present in the sludge.

## Geography
The site has mean annual temperature (MAT) of 9.5 degC, mean annual precipitation (MAP) of 1483.00559816076 mm/year, mean annual actual evaporation (EAT) of 528.63778611689 mm/year. Climate will influence the local fate emissions based on the elemental composition of the sludge as well as water evaporation to air (= consumptive water use).
References: UN data, 2020. Precipitation, Environment Statistics Database, United Nations Statistics Division Available at: http://data.un.org/Data.aspx?q=precipitation&d=ENV&f=variableID%3a6;
World Bank, 2022. Surface area (sq.km), World Bank Group Available at: https://data.worldbank.org/indicator/AG.SRF.TOTL.K2;
MeteoSwiss, 2022. Data on Swiss temperature mean, Federal Department of Home Affairs FDHA. Federal Office of Meteorology and Climatology. Swiss Climate Available at: https://www.MeteoSwiss.admin.ch/home/climate/swiss-climate-in-detail/Swiss-temperature-mean/Data-on-the-Swiss-temperature-mean.html?query=TEMPERATURE+DATA&topic=/content/MeteoSwiss/tags/topics/klima&pageIndex=0&tab=search_tab;
Doka G.,2021. A model for composition-specific life cycle inventories of regionalised wastewater fates, Zurich, Switzerland. http://www.doka.ch/publications.htm

## Technology
Landfarming is the process of spreading a substrate on agricultural soil. Sewage sludge is generated in the wastewater treatment of wastewater, average. Spreading of liquid sewage sludge (97w% water content) on agricultural fields with mobile vacuum tanker.

## Reference product
- sewage sludge, 97% water, WWT, WW, average: -1 kg; By-product classification Waste; CPC 39920: Sewage sludge
  production volume 1.81166e8 kg
    In Switzerland, 90% of the sewage sludge is disposed through municipal incineration and 10% in landfarming. Therefore, the PV for this reference product is calculated based on the production of sewage sludge of the wastewater treatment process (Doka G.,2021. A model for composition-specific life cycle inventories of regionalised wastewater fates, Zurich, Switzerland. http://www.doka.ch/publications.htm)
  properties: aluminium content 4.12498e-5, antimony content 4.6192e-6, arsenic content 3.85647e-6, barium content 0.000398112, beryllium content 2.5204e-7, boron content 3.72913e-5, cadmium content 2.042e-6, calcium content 0.0684358, carbon allocation 0.00911554 kg, carbon content 0.303851, carbon content, fossil 0.00782135, carbon content, non-fossil 0.29603, chromium content 5.46607e-5, cobalt content 1.00668e-5, copper content 0.000428909, dry mass 0.03 kg, heating value, gross 1.34371 MJ, heating value, net 0 MJ, hydrogen content 0.0413075, iron content 0.0533099, lead content 5.14255e-5, magnesium content 0.00541326, manganese content 0.000461279, mercury content 4.58448e-7, molybdenum content 1.04336e-5, nickel content 2.07364e-5, nitrogen content 0.0347053, oxygen content 0.437351, phosphorus content 0.0327866, potassium content 0.005493, price 0 EUR2005, scandium content 6.73454e-6, selenium content 4.41204e-6, silicon content 0.00450158, silver content 1.47859e-5, sodium content 0.00431077, strontium content 0.000439705, sulfur content 0.00522365, thallium content 3.18937e-7, tin content 3.14039e-5, titanium content 0.000195562, tungsten content 2.17649e-6, vanadium content 3.66558e-5, water content 32.3333, water in wet mass 0.97 kg, wet mass 1 kg, zinc content 0.00105314

## Inputs from technosphere
- liquid manure spreading, by vacuum tanker: 0.00097087 m3
  service consumed for treatment sewage sludge spreading on agricultural fields.
- organic nitrogen fertiliser, as N: -0.0010412 kg; lognormal variance with pedigree 0.056394, pedigree (1,1,1,1,1)
  gross fertilizer function provided from sewage sludge spreading on agricultural fields.
  Uncertainty: Uncertainty calculated from upstream wastewater technosphere fate uncertainty, wastewater composition uncertainty, and treatment model uncertainty
  production volume
    Calculated in proportion to wastewater reference product.
  properties: dry mass 1 kg, nitrogen content 1, price 0.473 EUR2005, wet mass 1 kg
  note on nitrogen content: Nitrogen content (on a dry matter basis) of organic nitrogen fertiliser, as N is calculated from the molecular formula of the substance (Nitrogen).
- organic phosphorus fertiliser, as P2O5: -0.002254 kg; lognormal variance with pedigree 0.048288, pedigree (1,1,1,1,1)
  (same comment as for organic nitrogen fertiliser, as N)
  production volume
    Calculated in proportion to wastewater reference product.
  properties: dry mass 1 kg, oxygen content 0.563579, phosphorus content 0.436421, price 0.241 EUR2005, wet mass 1 kg
  note on oxygen content: Oxygen content (on a dry matter basis) of organic phosphorus fertiliser, as P2O5 is calculated from the molecular formula of the substance (Phosphorus).
  note on phosphorus content: Phosphorus content (on a dry matter basis) of organic phosphorus fertiliser, as P2O5 is calculated from the molecular formula of the substance (Phosphorus).
- organic potassium fertiliser, as K2O: -0.00019851 kg; lognormal variance with pedigree 0.021105, pedigree (1,1,1,1,1)
  (same comment as for organic nitrogen fertiliser, as N)
  production volume
    Calculated in proportion to wastewater reference product.
  properties: dry mass 1 kg, oxygen content 0.169852, potassium content 0.830148, price 0.188 EUR2005, wet mass 1 kg
  note on oxygen content: Oxygen content (on a dry matter basis) of organic potassium fertiliser, as K2O is calculated from the molecular formula of the substance (Potassium).
  note on potassium content: Potassium content (on a dry matter basis) of organic potassium fertiliser, as K2O is calculated from the molecular formula of the substance (Potassium).

## Emissions to nature
- Ammonia [air, non-urban air or from high stacks]: 4.2638e-5 kg; lognormal variance with pedigree 0.068892, pedigree (1,1,2,1,1)
  local fate emission from sewage sludge spreading on agricultural fields.
  Uncertainty: Uncertainty calculated from upstream wastewater technosphere fate uncertainty, wastewater composition uncertainty, and treatment model uncertainty
- Carbon dioxide, fossil [air, non-urban air or from high stacks]: 0.000860348 kg; lognormal variance with pedigree 0.0008, pedigree (1,1,2,1,1)
  CO2 emission calculated based on the carbon content of the sewage sludge. It is assumed that all carbon present in the sludge, after being emmited to soil, is transformed into CO2.
  Uncertainty: Uncertainty calculated from wastewater technosphere fate uncertainty, wastewater composition uncertainty, and treatment model uncertainty
- Carbon dioxide, non-fossil [air, non-urban air or from high stacks]: 0.0325633 kg; lognormal variance with pedigree 0.0008, pedigree (1,1,2,1,1)
  (same comment as for Carbon dioxide, fossil)
- Dinitrogen monoxide [air, non-urban air or from high stacks]: 1.8761e-5 kg; lognormal variance with pedigree 0.07726, pedigree (1,1,2,1,1)
  (same comment as for Ammonia)
- Nitrogen oxides [air, non-urban air or from high stacks]: 8.2379e-6 kg; lognormal variance with pedigree 0.092491, pedigree (1,1,2,1,1)
  (same comment as for Ammonia)
- Water [air, non-urban air or from high stacks]: 0.00034577 m3; lognormal variance with pedigree 0.0014298, pedigree (1,1,2,1,1)
  climate-dependent evaporation of water from sludge from sewage sludge spreading on agricultural fields.
  Uncertainty: Uncertainty calculated from upstream wastewater technosphere fate uncertainty, wastewater composition uncertainty, and treatment model uncertainty
- Non-hazardous waste disposed [inventory indicator, waste]: 1 kg
  Inventory indicator for waste mass disposed. To be used in EN15804 "other data" results.
- Aluminium III [soil, agricultural]: 1.2375e-6 kg; lognormal variance with pedigree 0.342, pedigree (1,1,2,1,1)
  direct emission from sewage sludge spreading on agricultural fields.
  Uncertainty: Uncertainty calculated from upstream wastewater technosphere fate uncertainty, wastewater composition uncertainty, and treatment model uncertainty
- Antimony ion [soil, agricultural]: 1.3858e-7 kg; lognormal variance with pedigree 0.56583, pedigree (1,1,2,1,1)
  (same comment as for Aluminium III)
- Arsenic ion [soil, agricultural]: 1.1569e-7 kg; lognormal variance with pedigree 0.64559, pedigree (1,1,2,1,1)
  (same comment as for Aluminium III)
- Barium II [soil, agricultural]: 1.1943e-5 kg; lognormal variance with pedigree 0.21862, pedigree (1,1,2,1,1)
  (same comment as for Aluminium III)
- Beryllium II [soil, agricultural]: 7.5612e-9 kg; lognormal variance with pedigree 1.1602, pedigree (1,1,2,1,1)
  (same comment as for Aluminium III)
- Boron [soil, agricultural]: 1.1187e-6 kg; lognormal variance with pedigree 0.21556, pedigree (1,1,2,1,1)
  (same comment as for Aluminium III)
- Cadmium II [soil, agricultural]: 6.126e-8 kg; lognormal variance with pedigree 0.79695, pedigree (1,1,2,1,1)
  (same comment as for Aluminium III)
- Calcium [soil, agricultural]: 0.0020531 kg; lognormal variance with pedigree 0.0077821, pedigree (1,1,2,1,1)
  (same comment as for Aluminium III)
- Carbon [soil, agricultural]: 0.0091155 kg; lognormal variance with pedigree 0.043629, pedigree (1,1,2,1,1)
  (same comment as for Aluminium III)
- Chromium III [soil, agricultural]: 1.6398e-6 kg; lognormal variance with pedigree 0.39809, pedigree (1,1,2,1,1)
  (same comment as for Aluminium III)
- Cobalt II [soil, agricultural]: 3.02e-7 kg; lognormal variance with pedigree 0.55586, pedigree (1,1,2,1,1)
  (same comment as for Aluminium III)
- Copper ion [soil, agricultural]: 1.2867e-5 kg; lognormal variance with pedigree 0.22491, pedigree (1,1,2,1,1)
  (same comment as for Aluminium III)
- Heat, waste [soil, agricultural]: 0.34458 MJ; lognormal variance with pedigree 0.046068, pedigree (1,1,2,1,1)
  (same comment as for Aluminium III)
- Iron ion [soil, agricultural]: 0.0015993 kg; lognormal variance with pedigree 0.082178, pedigree (1,1,2,1,1)
  (same comment as for Aluminium III)
- Lead II [soil, agricultural]: 1.5428e-6 kg; lognormal variance with pedigree 0.41359, pedigree (1,1,2,1,1)
  (same comment as for Aluminium III)
- Magnesium [soil, agricultural]: 0.0001624 kg; lognormal variance with pedigree 0.027986, pedigree (1,1,2,1,1)
  (same comment as for Aluminium III)
- Manganese II [soil, agricultural]: 1.3838e-5 kg; lognormal variance with pedigree 0.22155, pedigree (1,1,2,1,1)
  (same comment as for Aluminium III)
- Mercury II [soil, agricultural]: 1.3753e-8 kg; lognormal variance with pedigree 1.0383, pedigree (1,1,2,1,1)
  (same comment as for Aluminium III)
- Molybdenum VI [soil, agricultural]: 3.1301e-7 kg; lognormal variance with pedigree 0.51165, pedigree (1,1,2,1,1)
  (same comment as for Aluminium III)
- Nickel II [soil, agricultural]: 6.2209e-7 kg; lognormal variance with pedigree 0.41952, pedigree (1,1,2,1,1)
  (same comment as for Aluminium III)
- Potassium I [soil, agricultural]: 0.00016479 kg; lognormal variance with pedigree 0.021305, pedigree (1,1,2,1,1)
  (same comment as for Aluminium III)
- Scandium [soil, agricultural]: 2.0204e-7 kg; lognormal variance with pedigree 0.53564, pedigree (1,1,2,1,1)
  (same comment as for Aluminium III)
- Selenium IV [soil, agricultural]: 1.3236e-7 kg; lognormal variance with pedigree 0.63506, pedigree (1,1,2,1,1)
  (same comment as for Aluminium III)
- Silicon [soil, agricultural]: 0.00013505 kg; lognormal variance with pedigree 0.080213, pedigree (1,1,2,1,1)
  (same comment as for Aluminium III)
- Silver I [soil, agricultural]: 4.4358e-7 kg; lognormal variance with pedigree 0.54587, pedigree (1,1,2,1,1)
  (same comment as for Aluminium III)
- Sodium [soil, agricultural]: 0.00012932 kg; lognormal variance with pedigree 0.0039253, pedigree (1,1,2,1,1)
  (same comment as for Aluminium III)
- Strontium [soil, agricultural]: 1.3191e-5 kg; lognormal variance with pedigree 0.12617, pedigree (1,1,2,1,1)
  (same comment as for Aluminium III)
- Sulfur [soil, agricultural]: 0.00015671 kg; lognormal variance with pedigree 0.020093, pedigree (1,1,2,1,1)
  (same comment as for Aluminium III)
- Thallium I [soil, agricultural]: 9.5681e-9 kg; lognormal variance with pedigree 1.0595, pedigree (1,1,2,1,1)
  (same comment as for Aluminium III)
- Tin ion [soil, agricultural]: 9.4212e-7 kg; lognormal variance with pedigree 0.45828, pedigree (1,1,2,1,1)
  (same comment as for Aluminium III)
- Titanium ion [soil, agricultural]: 5.8669e-6 kg; lognormal variance with pedigree 0.27687, pedigree (1,1,2,1,1)
  (same comment as for Aluminium III)
- Tungsten [soil, agricultural]: 6.5295e-8 kg; lognormal variance with pedigree 0.75059, pedigree (1,1,2,1,1)
  (same comment as for Aluminium III)
- Vanadium V [soil, agricultural]: 1.0997e-6 kg; lognormal variance with pedigree 0.4346, pedigree (1,1,2,1,1)
  (same comment as for Aluminium III)
- Zinc II [soil, agricultural]: 3.1594e-5 kg; lognormal variance with pedigree 0.16793, pedigree (1,1,2,1,1)
  (same comment as for Aluminium III)
- Nitrate [water, surface water]: 0.00069455 kg; lognormal variance with pedigree 0.060619, pedigree (1,1,2,1,1)
  (same comment as for Ammonia)
- Phosphate [water, ground-]: 1.7596e-5 kg; lognormal variance with pedigree 0.07532, pedigree (1,1,2,1,1)
  (same comment as for Ammonia)
- Phosphate [water, surface water]: 0.00031046 kg; lognormal variance with pedigree 0.054223, pedigree (1,1,2,1,1)
  (same comment as for Ammonia)
- Water [water, ground-]: 0.00062423 m3; lognormal variance with pedigree 0.0014298, pedigree (1,1,2,1,1)
  direct emission from not evaporated water (climate-dependent) from sludge from sewage sludge spreading on agricultural fields.
  Uncertainty: Uncertainty calculated from upstream wastewater technosphere fate uncertainty, wastewater composition uncertainty, and treatment model uncertainty
