# treatment of municipal solid waste, sanitary landfill

Dataset: EcoSpold 2, unit process
Geography: RoW
Time period: 1994-01-01 to 2022-12-31
Technology level: current
Classification: ISIC rev.4 ecoinvent: 3821:Treatment and disposal of non-hazardous waste
Classification: EcoSpold01Categories: waste management/sanitary landfill
Tags: Treatment; ConvertedDataset
Scenario: Business-as-Usual
System model: Substitution, consequential, long-term
Generated by: Gabor Doka (obsolete)
Published in: Doka G. 2007
Database: ecoinvent
isCopyrightProtected: true

## General comment
Inventoried waste contains 21% paper; 8% Mixed cardbord; 15% plastics; 3% laminated materials; 2% laminated packaging, e.g. tetra bricks; 3% combined goods e.g. dipers; 3% glass; 2% textiles; 8% minerals; 9% natural products; 22% compostable material; 2.65% inert metals; 1% volatile metals; 0.0065% batteries; 0.34% electronic goods; .
waste composition (wet, in ppm): upper heating value 13.27 MJ/kg; lower heating value 11.74 MJ/kg; H2O 228830; O 257060; H 48250; C 334230; S 1119; N 3123.8; P 893.79; B 7.1933; Cl 6866.2; Br 13.552; F 56.358; I 0.0121; Ag 0.714; As 0.62521; Ba 149.04; Cd 11.748; Co 1.3453; Cr 315.21; Cu 1212.8; Hg 1.4424; Mn 259.36; Mo 1.9551; Ni 107.38; Pb 502.43; Sb 22.564; Se 0.31969; Sn 73.44; V 9.2147; Zn 1311.2; Be n.a.; Sc n.a.; Sr n.a.; Ti n.a.; Tl n.a.; W n.a.; Si 48510; Fe 29996; Ca 14062; Al 12420; K 2059.7; Mg 3377.7; Na 5143.9;
Share of carbon in waste that is biogenic 60.4%.
Overall degradability of waste during 100 years: 18.73%.
[This dataset was already contained in the ecoinvent database version 2. It was not individually updated during the transfer to ecoinvent version 3. Life Cycle Impact Assessment results may still have changed, as they are affected by changes in the supply chain, i.e. in other datasets. This dataset was generated following the ecoinvent quality guidelines for version 2. It may have been subject to central changes described in the ecoinvent version 3 change report (http://www.ecoinvent.org/database/ecoinvent-version-3/reports-of-changes/), and the results of the central updates were reviewed extensively. The changes added e.g. consistent water flows and other information throughout the database. The documentation of this dataset can be found in the ecoinvent reports of version 2, which are still available via the ecoinvent website. The change report linked above covers all central changes that were made during the conversion process.]

## Included activities end
Waste-specific short-term emissions to air via landfill gas incineration and landfill leachate. Burdens from treatment of short-term leachate (0-100a) in wastewater treatment plant (including WWTP sludge disposal in municipal incinerator). Long-term emissions from landfill to groundwater (after base lining failure).

## Geography
Technology encountered in Switzerland in 2000. Landfill includes base seal, leachate collection system, treatment of leachate in municipal wastewater treatment plant.

## Technology
Swiss municipal sanitary landfill for biogenic or untreated municipal waste ('reactive organic landfill'). Landfill gas and leachate collection system. Recultivation and monitoring for 150 years after closure.

## Reference product
- municipal solid waste: -1 kg; By-product classification Waste; CPC 39910: Municipal waste
  EcoSpold01Location=CH
  production volume 8.42432e11 kg
    Estimated global municipal waste generation based on 760 kg/capita in the USA, extrapolation relative to GDP (9/47) and global population of 6700 million, minus incineration of 1.3 E+11 kg
  property carbon content, fossil 0.171549
    MSW composition in tab 4.1, ecoinvent v2.2 report 13_I. C content referred to 1 kg DM
  property carbon content, non-fossil 0.261655
    MSW composition in tab 4.1, ecoinvent v2.2 report 13_I. C content referred to 1 kg DM
  property heating value, net 11.74 MJ
    Value taken from the general comment of the treatment dataset.
  property price 0 EUR2005
    Waste products are assigned a price of zero as they are assumed to require further treatment.
  properties: carbon allocation 0.334 kg, carbon content 0.433204, dry mass 0.771 kg, water content 0.297017, water in wet mass 0.229 kg, wet mass 1 kg

## Inputs from technosphere
- aluminium sulfate, powder: 1.74e-5 kg; lognormal variance with pedigree 1.16, pedigree (5,5,5,5,5)
  burden from wastewater treatment of the short-term leachate (0-100a). Uncertainty calculated from unertainty of the waste composition of this waste, uncertainty in waste decomposition and short-term leaching in sanitary landfill
  EcoSpold01Location=RER
  Uncertainty: . Uncertainty calculated from unertainty of the waste composition of this waste, uncertainty in waste decomposition and short-term leaching in sanitary landfill
  properties: dry mass 1 kg, wet mass 1 kg
- ammonia, anhydrous, liquid: 6.59713e-8, 1.34225e-8, 1.28064e-7, 4.933e-7, 6.00034e-8, 3.97349e-8, 1.4195e-6 kg (7 suppliers, which the file names only by identifier); sum of these 2.22e-6 kg; lognormal variance with pedigree 0.472, pedigree (1,1,5,5,1)
  EcoSpold01Location=CH
  burden from incineration of sludge from wastewater treatment of the short-term leachate (0-100a). uncertainty is calculated from uncertainties in waste composition and transfer coefficients in incinerator and uncertainty of waste decomposition and short-term leaching in sanitary landfill
  properties: dry mass 1 kg, wet mass 1 kg
- cement, unspecified: 4.81627e-7, 7.90327e-7, 3.00147e-6, 7.41793e-8, 1.13407e-7, 3.02264e-5, 9.42126e-8, 1.81843e-6 kg (8 suppliers, which the file names only by identifier); sum of these 3.66e-5 kg; lognormal variance with pedigree 0.262, pedigree (1,1,5,5,1)
  (same comment as for ammonia, anhydrous, liquid)
  properties: dry mass 1 kg, wet mass 1 kg
- chemical, inorganic: 6.71e-9 kg; lognormal variance with pedigree 0.752, pedigree (1,1,5,5,1)
  EcoSpold01Location=GLO
  burden from incineration of sludge from wastewater treatment of the short-term leachate (0-100a). uncertainty is calculated from uncertainties in waste composition and transfer coefficients in incinerator and uncertainty of waste decomposition and short-term leaching in sanitary landfill
  properties: carbon content, fossil 0.003, dry mass 1 kg, wet mass 1 kg
  note on carbon content, fossil: This dataset is an unweighted average of 20 inorganic substances (listed in Tab 88.1, ecoinvent v2.2 report 8, part II), being part of the top100 chemicals included in this database. The C-content has also been calculated as an unweighted average of the C content of the substances composing this dataset.
- chemical, organic: 2.2e-7 kg; lognormal variance with pedigree 1.592, pedigree (1,1,5,5,1)
  (same comment as for chemical, inorganic)
  properties: carbon content, fossil 0.628, dry mass 1 kg, heating value, net 19.03 MJ, wet mass 1 kg
  note on carbon content, fossil: This dataset is an unweighted average of 20 organic substances (listed in Tab 88.1, ecoinvent v2.2 report 8, part II), being part of the top100 chemicals included in this database. The C-content has also been calculated as an unweighted average of the C content of the substances composing this dataset.
- chromium oxide, flakes: 1.29e-9 kg; lognormal variance with pedigree 0.83, pedigree (5,5,5,5,5)
  EcoSpold01Location=RER
  burden from incineration of sludge from wastewater treatment of the short-term leachate (0-100a). Proxy for vanadium pentoxide V2O5 in SCR catalyst, uncertainty calculated from uncertainty in average DeNOx input, uncertainty in the share of thermal NOx, uncertainty of nitrogen content in average municipal waste and the unertainty in nitrogen content in *this* waste and uncertainty of waste decomposition and short-term leaching in sanitary landfill
  Uncertainty: . Proxy for vanadium pentoxide V2O5 in SCR catalyst, uncertainty calculated from uncertainty in average DeNOx input, uncertainty in the share of thermal NOx, uncertainty of nitrogen content in average municipal waste and the unertainty in nitrogen content in *this* waste and uncertainty of waste decomposition and short-term leaching in sanitary landfill
  properties: dry mass 1 kg, wet mass 1 kg
- electricity, high voltage: 2.86942e-5, 2.97064e-6, 1.06022e-6, 1.06003e-6, 0.000235294, 5.30416e-6, 1.54398e-5, 2.96914e-5, 1.34853e-5 kWh (9 suppliers, which the file names only by identifier); sum of these 0.000333 kWh; lognormal variance with pedigree 0.372, pedigree (1,1,5,5,1)
  burden from incineration of sludge from wastewater treatment of the short-term leachate (0-100a). uncertainty is calculated from uncertainties in waste composition and transfer coefficients in incinerator and uncertainty of waste decomposition and short-term leaching in sanitary landfill
  EcoSpold01Location=CH
- electricity, low voltage: 9.82173e-5, 0.00591103, 0.000820885, 0.000550661, 7.36273e-5, 0.000708095, 2.46898e-5, 0.000332077, 0.000120719 kWh (9 suppliers, which the file names only by identifier); sum of these 0.00864 kWh; lognormal variance with pedigree 0.41, pedigree (5,5,5,5,5)
  EcoSpold01Location=CH
  burden from wastewater treatment of the short-term leachate (0-100a). Uncertainty calculated from unertainty of the waste composition of this waste, uncertainty in waste decomposition and short-term leaching in sanitary landfill
  Uncertainty: . Uncertainty calculated from unertainty of the waste composition of this waste, uncertainty in waste decomposition and short-term leaching in sanitary landfill
- heat, central or small-scale, other than natural gas: 0.000541223, 1.15707e-6 MJ (2 suppliers, which the file names only by identifier); sum of these 0.00054238 MJ; lognormal variance with pedigree 0.35, pedigree (5,5,5,5,5)
  burden from wastewater treatment of the short-term leachate (0-100a). Uncertainty calculated from unertainty of the waste composition of this waste, uncertainty in waste decomposition and short-term leaching in sanitary landfill
  EcoSpold01Location=CH
  Uncertainty: . Uncertainty calculated from unertainty of the waste composition of this waste, uncertainty in waste decomposition and short-term leaching in sanitary landfill
  properties: heating value, net 1 MJ
- heat, district or industrial, natural gas: 0.0002829, 0.00065934 MJ (2 suppliers, which the file names only by identifier); sum of these 0.00094224 MJ; lognormal variance with pedigree 0.472, pedigree (1,1,5,5,1)
  EcoSpold01Location=RER
  burden from incineration of sludge from wastewater treatment of the short-term leachate (0-100a). uncertainty is calculated from uncertainties in waste composition and transfer coefficients in incinerator and uncertainty of waste decomposition and short-term leaching in sanitary landfill
  properties: heating value, net 1 MJ
- heat, district or industrial, other than natural gas: 0.00161027, 0.000329732 MJ (2 suppliers, which the file names only by identifier); sum of these 0.00194 MJ; lognormal variance with pedigree 0.202, pedigree (1,1,5,5,1)
  (same comment as for ammonia, anhydrous, liquid)
  properties: heating value, net 1 MJ
- hydrochloric acid, without water, in 30% solution state: 4.03e-9 kg; lognormal variance with pedigree 0.752, pedigree (1,1,5,5,1)
  burden from incineration of sludge from wastewater treatment of the short-term leachate (0-100a). uncertainty is calculated from uncertainties in waste composition and transfer coefficients in incinerator and uncertainty of waste decomposition and short-term leaching in sanitary landfill
  EcoSpold01Location=RER
  properties: dry mass 1 kg, heating value, net 3.32 MJ, wet mass 1 kg
- iron (III) chloride, without water, in 40% solution state: 8.81e-5 kg; lognormal variance with pedigree 1.042, pedigree (1,1,5,5,1)
  (same comment as for electricity, high voltage)
  properties: dry mass 1 kg, wet mass 1 kg
- iron sulfate: 6.43e-5 kg; lognormal variance with pedigree 1.16, pedigree (5,5,5,5,5)
  EcoSpold01Location=RER
  burden from wastewater treatment of the short-term leachate (0-100a). Uncertainty calculated from unertainty of the waste composition of this waste, uncertainty in waste decomposition and short-term leaching in sanitary landfill
  Uncertainty: . Uncertainty calculated from unertainty of the waste composition of this waste, uncertainty in waste decomposition and short-term leaching in sanitary landfill
  properties: dry mass 1 kg, wet mass 1 kg
- municipal waste incineration facility: 5.8e-13 unit; lognormal variance with pedigree 0.202, pedigree (1,1,5,5,1)
  EcoSpold01Location=CH
  Burden from incineration of sludge from wastewater treatment of the short-term leachate (0-100a).
- process-specific burdens, municipal waste incineration: 0.000656269, 0.00166373 kg (2 suppliers, which the file names only by identifier); sum of these 0.00232 kg; lognormal variance with pedigree 0.202, pedigree (1,1,5,5,1)
  Burden from incineration of sludge from wastewater treatment of the short-term leachate (0-100a).
  EcoSpold01Location=CH
- process-specific burdens, residual material landfill: 2.5883e-5, 6.5617e-5 kg (2 suppliers, which the file names only by identifier); sum of these 9.15e-5 kg; lognormal variance with pedigree 0.262, pedigree (1,1,5,5,1)
  (same comment as for ammonia, anhydrous, liquid)
- process-specific burdens, sanitary landfill: 1 kg; lognormal variance with pedigree 0.042, pedigree (1,1,5,5,1)
  demands per kilogram waste. uncertainty is heeded in the module
  EcoSpold01Location=CH
- process-specific burdens, slag landfill: 0.000213004, 0.000539996 kg (2 suppliers, which the file names only by identifier); sum of these 0.000753 kg; lognormal variance with pedigree 0.322, pedigree (1,1,5,5,1)
  (same comment as for electricity, high voltage)
- quicklime, milled, packed: 2.39e-8 kg; lognormal variance with pedigree 0.342, pedigree (1,1,5,5,1)
  (same comment as for electricity, high voltage)
  properties: dry mass 0.99 kg, water content 0.010101, wet mass 1 kg
- residual material landfill: 1.91e-13 unit; lognormal variance with pedigree 0.262, pedigree (1,1,5,5,1)
  (same comment as for electricity, high voltage)
- sanitary landfill facility: 5.56e-10 unit; lognormal variance with pedigree 0.042, pedigree (1,1,5,5,1)
  demands per kilogram waste. uncertainty is heeded in the module
  EcoSpold01Location=CH
- sewer grid, 5E9l/year, 110 km: 5.45e-10 km; lognormal variance with pedigree 0.2106, pedigree (5,5,5,5,5)
  (same comment as for heat, central or small-scale, other than natural gas)
- slag landfill: 1.34e-12 unit; lognormal variance with pedigree 0.322, pedigree (1,1,5,5,1)
  (same comment as for electricity, high voltage)
- sodium hydroxide, without water, in 50% solution state: 1.32e-7 kg; lognormal variance with pedigree 0.342, pedigree (1,1,5,5,1)
  (same comment as for heat, district or industrial, natural gas)
  properties: dry mass 1 kg, heating value, net 3.03 MJ, wet mass 1 kg
- titanium dioxide: 6.35e-8 kg; lognormal variance with pedigree 0.712, pedigree (1,1,5,5,1)
  (same comment as for hydrochloric acid, without water, in 30% solution state)
  properties: dry mass 1 kg, wet mass 1 kg
- waste cement, hydrated: -2.5883e-5, -6.5617e-5 kg (2 suppliers, which the file names only by identifier); sum of these -9.15e-5 kg; lognormal variance with pedigree 0.222, pedigree (1,1,1,5,1)
  (same comment as for ammonia, anhydrous, liquid)
  production volume
    Calculated from the production volume of municipal solid waste, 22.9% water in proportion to the respective output amounts.
  properties: dry mass 1 kg, wet mass 1 kg
- waste graphical paper: -2.59179e-7, -4.09465e-6, -9.36524e-7, -9.13189e-8, -1.69726e-6, -1.69041e-7, -2.26629e-8, -3.15294e-5 kg (8 suppliers, which the file names only by identifier); sum of these -3.88e-5 kg; lognormal variance with pedigree 0.2106, pedigree (5,5,5,5,5)
  (same comment as for heat, central or small-scale, other than natural gas)
  production volume
    (same comment as for waste cement, hydrated)
  properties: carbon content, non-fossil 0.454955, dry mass 0.888 kg, heating value, net 14.12 MJ, water content 0.126126, wet mass 1 kg
  note on heating value, net: Value taken from the general comment of the treatment dataset.
- waste plastic, mixture: -2.18105e-8, -4.31618e-6, -1.19116e-7, -1.13112e-7, -2.88391e-7, -3.67759e-6, -4.81214e-8, -3.02157e-5 kg (8 suppliers, which the file names only by identifier); sum of these -3.88e-5 kg; lognormal variance with pedigree 0.2106, pedigree (5,5,5,5,5)
  (same comment as for heat, central or small-scale, other than natural gas)
  production volume
    (same comment as for waste cement, hydrated)
  properties: carbon content, fossil 0.747344, dry mass 0.847 kg, heating value, net 30.79 MJ, water content 0.180638, wet mass 1 kg
  note on carbon content, fossil: C content in 1 kg DM was calculated using data in Tab A.2, ecoinvent v2.2 report 13_I
- wastewater treatment facility, capacity 5E9l/year: 1.42e-11 unit; lognormal variance with pedigree 0.2106, pedigree (5,5,5,5,5)
  (same comment as for electricity, low voltage)

## Emissions to nature
- Aluminium III [air, non-urban air or from high stacks]: 2.4e-8 kg; lognormal variance with pedigree 1.862, pedigree (1,1,5,5,1)
  burden from direct release or incineration of landfill biogas. Uncertainty calculated from unertainty of the waste composition of this waste, uncertainty in waste decomposition and short-term leaching in sanitary landfill
- Aluminium III [air, urban air close to ground]: 1.45e-7 kg; lognormal variance with pedigree 0.782, pedigree (1,1,5,5,1)
  Emissions from short-term leachate treatment and incineration of resulting sludge. Uncertainty calculated depending on waste input and uncertainty of transfer coefficents in landfill, wastewater treatment and incineration model.
- Ammonia [air, urban air close to ground]: 1.41e-6 kg; lognormal variance with pedigree 0.392, pedigree (1,1,5,5,1)
  (same comment as for Aluminium III)
- Antimony ion [air, non-urban air or from high stacks]: 3.23e-11 kg; lognormal variance with pedigree 2.712, pedigree (1,1,5,5,1)
  (same comment as for Aluminium III)
- Antimony ion [air, urban air close to ground]: 6.36e-12 kg; lognormal variance with pedigree 2.282, pedigree (1,1,5,5,1)
  (same comment as for Aluminium III)
- Arsenic ion [air, non-urban air or from high stacks]: 4.21e-10 kg; lognormal variance with pedigree 2.372, pedigree (1,1,5,5,1)
  (same comment as for Aluminium III)
- Arsenic ion [air, urban air close to ground]: 8.46e-12 kg; lognormal variance with pedigree 1.902, pedigree (1,1,5,5,1)
  (same comment as for Aluminium III)
- Barium II [air, non-urban air or from high stacks]: 2.74e-9 kg; lognormal variance with pedigree 2.132, pedigree (1,1,5,5,1)
  (same comment as for Aluminium III)
- Barium II [air, urban air close to ground]: 1.03e-8 kg; lognormal variance with pedigree 1.142, pedigree (1,1,5,5,1)
  (same comment as for Aluminium III)
- Boron [air, urban air close to ground]: 4.25e-7 kg; lognormal variance with pedigree 1.382, pedigree (1,1,5,5,1)
  (same comment as for Aluminium III)
- Bromine [air, non-urban air or from high stacks]: 2.37e-8 kg; lognormal variance with pedigree 1.852, pedigree (1,1,5,5,1)
  (same comment as for Aluminium III)
- Cadmium II [air, non-urban air or from high stacks]: 9.3e-10 kg; lognormal variance with pedigree 2.282, pedigree (1,1,5,5,1)
  (same comment as for Aluminium III)
- Cadmium II [air, urban air close to ground]: 3.81e-12 kg; lognormal variance with pedigree 1.682, pedigree (1,1,5,5,1)
  (same comment as for Aluminium III)
- Calcium [air, non-urban air or from high stacks]: 7.84e-8 kg; lognormal variance with pedigree 1.702, pedigree (1,1,5,5,1)
  (same comment as for Aluminium III)
- Calcium [air, urban air close to ground]: 5.13e-8 kg; lognormal variance with pedigree 0.672, pedigree (1,1,5,5,1)
  (same comment as for Aluminium III)
- Carbon dioxide, fossil [air, non-urban air or from high stacks]: 0.00615 kg; lognormal variance with pedigree 0.162, pedigree (1,1,5,5,1)
  (same comment as for Aluminium III)
- Carbon dioxide, fossil [air, urban air close to ground]: 0.000205 kg; lognormal variance with pedigree 0.532, pedigree (1,1,5,5,1)
  (same comment as for Aluminium III)
- Carbon dioxide, non-fossil [air, non-urban air or from high stacks]: 0.135 kg; lognormal variance with pedigree 0.162, pedigree (1,1,5,5,1)
  (same comment as for Aluminium III)
- Carbon dioxide, non-fossil [air, urban air close to ground]: 0.0045 kg; lognormal variance with pedigree 0.532, pedigree (1,1,5,5,1)
  (same comment as for Aluminium III)
- Carbon monoxide, fossil [air, non-urban air or from high stacks]: 3.49e-7 kg; lognormal variance with pedigree 0.802, pedigree (1,1,5,5,1)
  (same comment as for Aluminium III)
- Carbon monoxide, fossil [air, urban air close to ground]: 1.45e-7 kg; lognormal variance with pedigree 0.492, pedigree (1,1,5,5,1)
  (same comment as for Aluminium III)
- Carbon monoxide, non-fossil [air, non-urban air or from high stacks]: 7.63e-6 kg; lognormal variance with pedigree 0.802, pedigree (1,1,5,5,1)
  (same comment as for Aluminium III)
- Carbon monoxide, non-fossil [air, urban air close to ground]: 3.17e-6 kg; lognormal variance with pedigree 0.492, pedigree (1,1,5,5,1)
  (same comment as for Aluminium III)
- Chromium III [air, non-urban air or from high stacks]: 8.43e-11 kg; lognormal variance with pedigree 2.582, pedigree (1,1,5,5,1)
  (same comment as for Aluminium III)
- Chromium III [air, urban air close to ground]: 1.23e-14 kg; lognormal variance with pedigree 1.602, pedigree (1,1,5,5,1)
  (same comment as for Aluminium III)
- Cobalt II [air, non-urban air or from high stacks]: 2.9e-11 kg; lognormal variance with pedigree 2.732, pedigree (1,1,5,5,1)
  (same comment as for Aluminium III)
- Cobalt II [air, urban air close to ground]: 1.82e-15 kg; lognormal variance with pedigree 1.832, pedigree (1,1,5,5,1)
  (same comment as for Aluminium III)
- Copper ion [air, non-urban air or from high stacks]: 8.32e-11 kg; lognormal variance with pedigree 2.572, pedigree (1,1,5,5,1)
  (same comment as for Aluminium III)
- Copper ion [air, urban air close to ground]: 1.59e-12 kg; lognormal variance with pedigree 1.582, pedigree (1,1,5,5,1)
  (same comment as for Aluminium III)
- Cyanide [air, urban air close to ground]: 3.95e-8 kg; lognormal variance with pedigree 0.492, pedigree (1,1,5,5,1)
  (same comment as for Aluminium III)
- Dinitrogen monoxide [air, urban air close to ground]: 3.88e-6 kg; lognormal variance with pedigree 0.342, pedigree (1,1,5,5,1)
  (same comment as for Aluminium III)
- Hydrochloric acid [air, non-urban air or from high stacks]: 1.79e-5 kg; lognormal variance with pedigree 0.992, pedigree (1,1,5,5,1)
  (same comment as for Aluminium III)
- Hydrogen fluoride [air, non-urban air or from high stacks]: 5.82e-6 kg; lognormal variance with pedigree 1.202, pedigree (1,1,5,5,1)
  (same comment as for Aluminium III)
- Iodine [air, non-urban air or from high stacks]: 1.15e-10 kg; lognormal variance with pedigree 2.342, pedigree (1,1,5,5,1)
  (same comment as for Aluminium III)
- Iron ion [air, non-urban air or from high stacks]: 7.77e-9 kg; lognormal variance with pedigree 2.012, pedigree (1,1,5,5,1)
  (same comment as for Aluminium III)
- Iron ion [air, urban air close to ground]: 2.31e-9 kg; lognormal variance with pedigree 0.842, pedigree (1,1,5,5,1)
  (same comment as for Aluminium III)
- Lead II [air, non-urban air or from high stacks]: 5.62e-11 kg; lognormal variance with pedigree 2.622, pedigree (1,1,5,5,1)
  (same comment as for Aluminium III)
- Lead II [air, urban air close to ground]: 5.58e-12 kg; lognormal variance with pedigree 1.642, pedigree (1,1,5,5,1)
  (same comment as for Aluminium III)
- Magnesium [air, non-urban air or from high stacks]: 1.02e-7 kg; lognormal variance with pedigree 1.652, pedigree (1,1,5,5,1)
  (same comment as for Aluminium III)
- Magnesium [air, urban air close to ground]: 5.52e-8 kg; lognormal variance with pedigree 0.682, pedigree (1,1,5,5,1)
  (same comment as for Aluminium III)
- Manganese II [air, non-urban air or from high stacks]: 1.49e-9 kg; lognormal variance with pedigree 2.212, pedigree (1,1,5,5,1)
  (same comment as for Aluminium III)
- Manganese II [air, urban air close to ground]: 1.59e-14 kg; lognormal variance with pedigree 1.292, pedigree (1,1,5,5,1)
  (same comment as for Aluminium III)
- Mercury II [air, non-urban air or from high stacks]: 1.2e-9 kg; lognormal variance with pedigree 2.242, pedigree (1,1,5,5,1)
  (same comment as for Aluminium III)
- Mercury II [air, urban air close to ground]: 5.07e-15 kg; lognormal variance with pedigree 2.182, pedigree (1,1,5,5,1)
  (same comment as for Aluminium III)
- Methane, fossil [air, non-urban air or from high stacks]: 0.000944 kg; lognormal variance with pedigree 0.202, pedigree (1,1,5,5,1)
  (same comment as for Aluminium III)
- Methane, fossil [air, urban air close to ground]: 4.03e-7 kg; lognormal variance with pedigree 0.582, pedigree (1,1,5,5,1)
  (same comment as for Aluminium III)
- Methane, non-fossil [air, non-urban air or from high stacks]: 0.0206 kg; lognormal variance with pedigree 0.202, pedigree (1,1,5,5,1)
  (same comment as for Aluminium III)
- Methane, non-fossil [air, urban air close to ground]: 8.81e-6 kg; lognormal variance with pedigree 0.582, pedigree (1,1,5,5,1)
  (same comment as for Aluminium III)
- Molybdenum VI [air, non-urban air or from high stacks]: 1.41e-11 kg; lognormal variance with pedigree 2.832, pedigree (1,1,5,5,1)
  (same comment as for Aluminium III)
- Molybdenum VI [air, urban air close to ground]: 5.55e-11 kg; lognormal variance with pedigree 1.802, pedigree (1,1,5,5,1)
  (same comment as for Aluminium III)
- NMVOC, non-methane volatile organic compounds [air, non-urban air or from high stacks]: 1.51e-7 kg; lognormal variance with pedigree 0.202, pedigree (1,1,5,5,1)
  (same comment as for Aluminium III)
- NMVOC, non-methane volatile organic compounds [air, urban air close to ground]: 4.18e-8 kg; lognormal variance with pedigree 0.692, pedigree (1,1,5,5,1)
  (same comment as for Aluminium III)
- Nickel II [air, non-urban air or from high stacks]: 9.6e-11 kg; lognormal variance with pedigree 2.572, pedigree (1,1,5,5,1)
  (same comment as for Aluminium III)
- Nickel II [air, urban air close to ground]: 6.52e-15 kg; lognormal variance with pedigree 1.602, pedigree (1,1,5,5,1)
  (same comment as for Aluminium III)
- Nitrogen oxides [air, non-urban air or from high stacks]: 4.07e-7 kg; lognormal variance with pedigree 0.832, pedigree (1,1,5,5,1)
  (same comment as for Aluminium III)
- Nitrogen oxides [air, urban air close to ground]: 1.37e-5 kg; lognormal variance with pedigree 0.382, pedigree (1,1,5,5,1)
  (same comment as for Aluminium III)
- Particulate Matter, < 2.5 um [air, non-urban air or from high stacks]: 2.68e-6 kg; lognormal variance with pedigree 0.462, pedigree (1,1,5,5,1)
  (same comment as for Aluminium III)
- Phosphorus [air, urban air close to ground]: 8.6e-9 kg; lognormal variance with pedigree 1.062, pedigree (1,1,5,5,1)
  (same comment as for Aluminium III)
- Potassium I [air, non-urban air or from high stacks]: 1.07e-7 kg; lognormal variance with pedigree 1.642, pedigree (1,1,5,5,1)
  (same comment as for Aluminium III)
- Selenium IV [air, non-urban air or from high stacks]: 1.52e-12 kg; lognormal variance with pedigree 3.112, pedigree (1,1,5,5,1)
  (same comment as for Aluminium III)
- Selenium IV [air, urban air close to ground]: 1.51e-17 kg; lognormal variance with pedigree 2.182, pedigree (1,1,5,5,1)
  (same comment as for Aluminium III)
- Silicon [air, non-urban air or from high stacks]: 5.19e-8 kg; lognormal variance with pedigree 1.782, pedigree (1,1,5,5,1)
  (same comment as for Aluminium III)
- Silicon [air, urban air close to ground]: 4.54e-7 kg; lognormal variance with pedigree 0.742, pedigree (1,1,5,5,1)
  (same comment as for Aluminium III)
- Sodium [air, non-urban air or from high stacks]: 2.63e-7 kg; lognormal variance with pedigree 1.532, pedigree (1,1,5,5,1)
  (same comment as for Aluminium III)
- Sulfur dioxide [air, non-urban air or from high stacks]: 2.74e-5 kg; lognormal variance with pedigree 1.022, pedigree (1,1,5,5,1)
  (same comment as for Aluminium III)
- Tin ion [air, non-urban air or from high stacks]: 3.41e-12 kg; lognormal variance with pedigree 2.992, pedigree (1,1,5,5,1)
  (same comment as for Aluminium III)
- Tin ion [air, urban air close to ground]: 1.05e-11 kg; lognormal variance with pedigree 1.952, pedigree (1,1,5,5,1)
  (same comment as for Aluminium III)
- Vanadium V [air, non-urban air or from high stacks]: 4.57e-11 kg; lognormal variance with pedigree 2.672, pedigree (1,1,5,5,1)
  (same comment as for Aluminium III)
- Vanadium V [air, urban air close to ground]: 8.99e-12 kg; lognormal variance with pedigree 1.652, pedigree (1,1,5,5,1)
  (same comment as for Aluminium III)
- Zinc II [air, non-urban air or from high stacks]: 5.09e-10 kg; lognormal variance with pedigree 2.342, pedigree (1,1,5,5,1)
  (same comment as for Aluminium III)
- Zinc II [air, urban air close to ground]: 2.59e-11 kg; lognormal variance with pedigree 1.312, pedigree (1,1,5,5,1)
  (same comment as for Aluminium III)
- Aluminium III [water, ground-, long-term]: 0.0124 kg; lognormal variance with pedigree 0.382, pedigree (1,1,5,5,1)
  Emissions from long-term leachate (>100a) directly from MSW landfill and indirectly via incineration of treatement sludge from leachate treatement. Uncertainty calculated depending on waste input and uncertainty of long-term transfer coefficents in landfill.
- Aluminium III [water, surface water]: 5.76e-6 kg; lognormal variance with pedigree 0.792, pedigree (1,1,5,5,1)
  (same comment as for Aluminium III)
- Ammonium [water, ground-, long-term]: 0.000631 kg; lognormal variance with pedigree 0.562, pedigree (1,1,5,5,1)
  (same comment as for Aluminium III)
- Ammonium [water, surface water]: 0.000763 kg; lognormal variance with pedigree 0.402, pedigree (1,1,5,5,1)
  (same comment as for Aluminium III)
- Antimony ion [water, ground-, long-term]: 2.29e-6 kg; lognormal variance with pedigree 2.502, pedigree (1,1,5,5,1)
  (same comment as for Aluminium III)
- Antimony ion [water, surface water]: 8.76e-8 kg; lognormal variance with pedigree 1.632, pedigree (1,1,5,5,1)
  (same comment as for Aluminium III)
- Arsenic ion [water, ground-, long-term]: 5.98e-7 kg; lognormal variance with pedigree 1.652, pedigree (1,1,5,5,1)
  (same comment as for Aluminium III)
- Arsenic ion [water, surface water]: 2.65e-8 kg; lognormal variance with pedigree 1.862, pedigree (1,1,5,5,1)
  (same comment as for Aluminium III)
- BOD5, Biological Oxygen Demand [water, ground-, long-term]: 0.0185 kg; lognormal variance with pedigree 0.602, pedigree (1,1,5,5,1)
  (same comment as for Aluminium III)
- BOD5, Biological Oxygen Demand [water, surface water]: 0.000325 kg; lognormal variance with pedigree 0.532, pedigree (1,1,5,5,1)
  (same comment as for Aluminium III)
- Barium II [water, ground-, long-term]: 0.000147 kg; lognormal variance with pedigree 0.872, pedigree (1,1,5,5,1)
  (same comment as for Aluminium III)
- Barium II [water, surface water]: 6.6e-7 kg; lognormal variance with pedigree 1.122, pedigree (1,1,5,5,1)
  (same comment as for Aluminium III)
- Boron [water, ground-, long-term]: 2.34e-6 kg; lognormal variance with pedigree 1.382, pedigree (1,1,5,5,1)
  (same comment as for Aluminium III)
- Boron [water, surface water]: 4.2e-6 kg; lognormal variance with pedigree 1.352, pedigree (1,1,5,5,1)
  (same comment as for Aluminium III)
- Bromine [water, ground-, long-term]: 1.18e-5 kg; lognormal variance with pedigree 1.272, pedigree (1,1,5,5,1)
  (same comment as for Aluminium III)
- Bromine [water, surface water]: 1.69e-6 kg; lognormal variance with pedigree 1.372, pedigree (1,1,5,5,1)
  Emissions from short-term leachate treatment. Uncertainty calculated depending on waste input and uncertainty of transfer coefficents in landfill and wastewater treatment.
- COD, Chemical Oxygen Demand [water, ground-, long-term]: 0.0779 kg; lognormal variance with pedigree 0.602, pedigree (1,1,5,5,1)
  (same comment as for Aluminium III)
- COD, Chemical Oxygen Demand [water, surface water]: 0.00103 kg; lognormal variance with pedigree 0.532, pedigree (1,1,5,5,1)
  (same comment as for Aluminium III)
- Cadmium II [water, ground-, long-term]: 1.16e-5 kg; lognormal variance with pedigree 1.292, pedigree (1,1,5,5,1)
  (same comment as for Aluminium III)
- Cadmium II [water, surface water]: 7.08e-8 kg; lognormal variance with pedigree 1.632, pedigree (1,1,5,5,1)
  (same comment as for Aluminium III)
- Calcium II [water, ground-, long-term]: 0.0138 kg; lognormal variance with pedigree 0.372, pedigree (1,1,5,5,1)
  (same comment as for Aluminium III)
- Calcium II [water, surface water]: 0.000283 kg; lognormal variance with pedigree 0.642, pedigree (1,1,5,5,1)
  (same comment as for Aluminium III)
- Chloride [water, ground-, long-term]: 0.00561 kg; lognormal variance with pedigree 0.462, pedigree (1,1,5,5,1)
  (same comment as for Aluminium III)
- Chloride [water, surface water]: 0.0013 kg; lognormal variance with pedigree 0.492, pedigree (1,1,5,5,1)
  (same comment as for Bromine)
- Chromium III [water, surface water]: 5.29e-10 kg; lognormal variance with pedigree 1.532, pedigree (1,1,5,5,1)
  (same comment as for Aluminium III)
- Chromium VI [water, ground-, long-term]: 1.44e-6 kg; lognormal variance with pedigree 8.142, pedigree (1,1,5,5,1)
  (same comment as for Aluminium III)
- Chromium VI [water, surface water]: 1.76e-7 kg; lognormal variance with pedigree 1.502, pedigree (1,1,5,5,1)
  (same comment as for Aluminium III)
- Cobalt II [water, ground-, long-term]: 1.28e-6 kg; lognormal variance with pedigree 1.512, pedigree (1,1,5,5,1)
  (same comment as for Aluminium III)
- Cobalt II [water, surface water]: 5.9e-8 kg; lognormal variance with pedigree 1.702, pedigree (1,1,5,5,1)
  (same comment as for Aluminium III)
- Copper ion [water, ground-, long-term]: 0.00121 kg; lognormal variance with pedigree 0.672, pedigree (1,1,5,5,1)
  (same comment as for Aluminium III)
- Copper ion [water, surface water]: 7.55e-8 kg; lognormal variance with pedigree 1.512, pedigree (1,1,5,5,1)
  (same comment as for Aluminium III)
- DOC, Dissolved Organic Carbon [water, ground-, long-term]: 0.0713 kg; lognormal variance with pedigree 0.602, pedigree (1,1,5,5,1)
  (same comment as for Aluminium III)
- DOC, Dissolved Organic Carbon [water, surface water]: 0.000251 kg; lognormal variance with pedigree 0.532, pedigree (1,1,5,5,1)
  (same comment as for Aluminium III)
- Fluoride [water, ground-, long-term]: 4.98e-5 kg; lognormal variance with pedigree 1.082, pedigree (1,1,5,5,1)
  (same comment as for Aluminium III)
- Fluoride [water, surface water]: 1.07e-6 kg; lognormal variance with pedigree 1.372, pedigree (1,1,5,5,1)
  (same comment as for Bromine)
- Hydrogen sulfide [water, ground-, long-term]: 7.48e-5 kg; lognormal variance with pedigree 0.682, pedigree (1,1,5,5,1)
  (same comment as for Aluminium III)
- Iodide [water, ground-, long-term]: 3.76e-9 kg; lognormal variance with pedigree 1.982, pedigree (1,1,5,5,1)
  (same comment as for Aluminium III)
- Iodide [water, surface water]: 8.23e-9 kg; lognormal variance with pedigree 1.972, pedigree (1,1,5,5,1)
  (same comment as for Bromine)
- Iron ion [water, ground-, long-term]: 0.00213 kg; lognormal variance with pedigree 2.022, pedigree (1,1,5,5,1)
  (same comment as for Aluminium III)
- Iron ion [water, surface water]: 1.58e-5 kg; lognormal variance with pedigree 0.932, pedigree (1,1,5,5,1)
  (same comment as for Aluminium III)
- Lead II [water, ground-, long-term]: 0.000502 kg; lognormal variance with pedigree 0.792, pedigree (1,1,5,5,1)
  (same comment as for Aluminium III)
- Lead II [water, surface water]: 1.85e-8 kg; lognormal variance with pedigree 1.582, pedigree (1,1,5,5,1)
  (same comment as for Aluminium III)
- Magnesium [water, ground-, long-term]: 0.00301 kg; lognormal variance with pedigree 0.532, pedigree (1,1,5,5,1)
  (same comment as for Aluminium III)
- Magnesium [water, surface water]: 0.000369 kg; lognormal variance with pedigree 0.652, pedigree (1,1,5,5,1)
  (same comment as for Aluminium III)
- Manganese II [water, ground-, long-term]: 0.00025 kg; lognormal variance with pedigree 0.862, pedigree (1,1,5,5,1)
  (same comment as for Aluminium III)
- Manganese II [water, surface water]: 3.02e-6 kg; lognormal variance with pedigree 1.142, pedigree (1,1,5,5,1)
  (same comment as for Aluminium III)
- Mercury II [water, ground-, long-term]: 1.44e-6 kg; lognormal variance with pedigree 1.562, pedigree (1,1,5,5,1)
  (same comment as for Aluminium III)
- Mercury II [water, surface water]: 9.48e-10 kg; lognormal variance with pedigree 2.122, pedigree (1,1,5,5,1)
  (same comment as for Aluminium III)
- Molybdenum VI [water, ground-, long-term]: 7.73e-7 kg; lognormal variance with pedigree 1.692, pedigree (1,1,5,5,1)
  (same comment as for Aluminium III)
- Molybdenum VI [water, surface water]: 3.33e-8 kg; lognormal variance with pedigree 1.772, pedigree (1,1,5,5,1)
  (same comment as for Aluminium III)
- Nickel II [water, ground-, long-term]: 0.000107 kg; lognormal variance with pedigree 0.992, pedigree (1,1,5,5,1)
  (same comment as for Aluminium III)
- Nickel II [water, surface water]: 2.33e-7 kg; lognormal variance with pedigree 1.492, pedigree (1,1,5,5,1)
  (same comment as for Aluminium III)
- Nitrate [water, ground-, long-term]: 6.8e-5 kg; lognormal variance with pedigree 0.542, pedigree (1,1,5,5,1)
  (same comment as for Aluminium III)
- Nitrate [water, surface water]: 0.00278 kg; lognormal variance with pedigree 0.362, pedigree (1,1,5,5,1)
  (same comment as for Aluminium III)
- Nitrite [water, ground-, long-term]: 3.44e-5 kg; lognormal variance with pedigree 0.562, pedigree (1,1,5,5,1)
  (same comment as for Aluminium III)
- Nitrite [water, surface water]: 1.6e-5 kg; lognormal variance with pedigree 0.572, pedigree (1,1,5,5,1)
  (same comment as for Aluminium III)
- Nitrogen [water, surface water]: 2.07e-5 kg; lognormal variance with pedigree 0.372, pedigree (1,1,5,5,1)
  (same comment as for Aluminium III)
- Nitrogen, organic bound [water, ground-, long-term]: 0.00103 kg; lognormal variance with pedigree 0.562, pedigree (1,1,5,5,1)
  (same comment as for Aluminium III)
- Phosphate [water, ground-, long-term]: 1.93e-5 kg; lognormal variance with pedigree 6.942, pedigree (1,1,5,5,1)
  (same comment as for Aluminium III)
- Phosphate [water, surface water]: 1.46e-5 kg; lognormal variance with pedigree 1.032, pedigree (1,1,5,5,1)
  (same comment as for Aluminium III)
- Potassium I [water, ground-, long-term]: 0.00163 kg; lognormal variance with pedigree 0.612, pedigree (1,1,5,5,1)
  (same comment as for Aluminium III)
- Potassium I [water, surface water]: 0.000428 kg; lognormal variance with pedigree 0.672, pedigree (1,1,5,5,1)
  (same comment as for Bromine)
- Selenium IV [water, ground-, long-term]: 9.04e-8 kg; lognormal variance with pedigree 2.132, pedigree (1,1,5,5,1)
  (same comment as for Aluminium III)
- Selenium IV [water, surface water]: 4.07e-9 kg; lognormal variance with pedigree 2.052, pedigree (1,1,5,5,1)
  (same comment as for Aluminium III)
- Silicon [water, ground-, long-term]: 0.000941 kg; lognormal variance with pedigree 4.092, pedigree (1,1,5,5,1)
  (same comment as for Aluminium III)
- Silicon [water, surface water]: 1.25e-5 kg; lognormal variance with pedigree 0.722, pedigree (1,1,5,5,1)
  (same comment as for Aluminium III)
- Silver I [water, ground-, long-term]: 7.14e-7 kg; lognormal variance with pedigree 1.652, pedigree (1,1,5,5,1)
  (same comment as for Aluminium III)
- Sodium I [water, ground-, long-term]: 0.00409 kg; lognormal variance with pedigree 0.492, pedigree (1,1,5,5,1)
  (same comment as for Aluminium III)
- Sodium I [water, surface water]: 0.00105 kg; lognormal variance with pedigree 0.552, pedigree (1,1,5,5,1)
  (same comment as for Bromine)
- Sulfate [water, ground-, long-term]: 0.00287 kg; lognormal variance with pedigree 0.682, pedigree (1,1,5,5,1)
  (same comment as for Aluminium III)
- Sulfate [water, surface water]: 0.000294 kg; lognormal variance with pedigree 0.652, pedigree (1,1,5,5,1)
  (same comment as for Bromine)
- TOC, Total Organic Carbon [water, ground-, long-term]: 0.0713 kg; lognormal variance with pedigree 0.602, pedigree (1,1,5,5,1)
  (same comment as for Aluminium III)
- TOC, Total Organic Carbon [water, surface water]: 0.000261 kg; lognormal variance with pedigree 0.532, pedigree (1,1,5,5,1)
  (same comment as for Aluminium III)
- Tin ion [water, ground-, long-term]: 7.34e-5 kg; lognormal variance with pedigree 1.042, pedigree (1,1,5,5,1)
  (same comment as for Aluminium III)
- Tin ion [water, surface water]: 5.71e-9 kg; lognormal variance with pedigree 1.922, pedigree (1,1,5,5,1)
  (same comment as for Aluminium III)
- Vanadium V [water, ground-, long-term]: 2.65e-6 kg; lognormal variance with pedigree 1.692, pedigree (1,1,5,5,1)
  (same comment as for Aluminium III)
- Vanadium V [water, surface water]: 9.27e-8 kg; lognormal variance with pedigree 1.602, pedigree (1,1,5,5,1)
  (same comment as for Aluminium III)
- Zinc II [water, ground-, long-term]: 0.00108 kg; lognormal variance with pedigree 0.672, pedigree (1,1,5,5,1)
  (same comment as for Aluminium III)
- Zinc II [water, surface water]: 7.09e-7 kg; lognormal variance with pedigree 1.242, pedigree (1,1,5,5,1)
  (same comment as for Aluminium III)

## Sampling procedure
Landfill model based on observed leachate concentrations in literature. Extrapolated to 60'000 years heeding chemical characteristics. Initial waste composition from various literature sources.

## Extrapolations
This dataset has been copied from an original dataset covering the geography CH. The uncertainty has been adjusted accordingly.

## Review by Niels Jungbluth 2003-07-21
Passed. Calculation for standard deviation 95 of, i.e., infrastructure,
land occupation, transport services or other services can differ from
standard Pedigree approach used in this project and figures obtained by
this procedure.
