# intensive beef cattle production on pasture

Dataset: EcoSpold 2, unit process
Geography: RoW
Time period: 2006-01-01 to 2022-12-31
Technology level: current
Classification: ISIC rev.4 ecoinvent: 0141:Raising of cattle and buffaloes
Scenario: Business-as-Usual
System model: Substitution, consequential, long-term
Share of production covered: 3 %
Generated by: Fernando Dias
Published in: Folegatti-Matsuura M. 2018
Database: ecoinvent
isCopyrightProtected: true

## General comment
This dataset represents the production of 1 kg of live weight of beef cattle, in Brazil, on planted pasture, at farm, for slaughtering. Discarded cattle (bulls and culled cows) are considered part of the product. Culled cows are replaced by some of the weaned heifers. Some weaned heifers are sold for fattening by other systems, and are considered by product, but some are kept to be fattened in the farm. Some weaned calves are selected to be sold for fattening by other systems, some are selected to be fattened and sold under 24 months, the remaining are fattened on pasture. The dataset include operations for pasture maintenance and replanting. Fences are the only infrastructure included. Grass seeds are not included (less then 3% of product mass). The production of young bulls for reproduction is not included for the same reason, but their emissions in the farm and their live weight as product are considered. Direct field emissions are included, with important regionalizations added. Farm manure as an organic fertiliser is only accounted for in terms of direct field emissions.

## Included activities start
This activity starts at the replanting of pasture.

## Included activities end
This activity ends with the provision of fat steers, culled cows and bulls at farm gate, ready to be sent to slaughterhouses as live weight.

## Technology
Cattle is kept on regularly fertilized pastures. Mineral salt is served to all cattle in troughs on the field. Besides pasture and mineral salt, proteic supplement (maize, soybean meal, urea and salt) is served to weaned calves during the first dry season and some of the steers receive concentrate feed for 80 days in troughs on the field during the second dry season and are sold for slaughter under 24 months, others are kept on pasture and sold for slaughterhouses under 30 months. Some of the heifers not selected for replacing culled cows are kept on pasture and are sold for slaughterhouses under 30 months. The dataset does not include pharmaceuticals, although typical production systems use them. Use of hormones for cattle raising is forbidden in Brazil.

## Time period
Time period of the most of the data collected for this dataset.

## Parameters
- clay content into soil: 53.06 % (obsolete); name Clay_content; lognormal variance with pedigree 0.0573, pedigree (4,3,4,3,4)
  Fraction of clay content into soil. Used in the SQCB-NO3 model for the calculation of leaching of NO3. From Folegatti et al. (2015).
- dinitrogen monoxide from manure in feedlot: 0 kg; name N2O_feedlot
  N2O from manure management in feedlot, direct and indirect emissions (IPCC 2006).
- emission factor N2O: 0.02 dimensionless; name EF_N2O; lognormal variance with pedigree 0.0573, pedigree (4,3,4,3,4)
  Emission factor of N2O from manure deposited in pasture. From IPCC (2006).
- nitrogen fertilizer, as N: 0.039937 kg; name N_fert; lognormal variance with pedigree 0.0573, pedigree (4,3,4,3,4)
  Nitrogen fertilizer (not urea) for fertilization.
- nitrogen in crop residues: 0 kg N/ha; name Ncrop_residues
  N contained in the crop residues. Used for the calculation of emissions of N2O to the air. Not considered for pastures because root is semiperennial.
- nitrogen in manure on pasture: 0.52053 kg; name N_ex; lognormal variance with pedigree 0.0573, pedigree (4,3,4,3,4)
  Manure deposited on pasture, as N, per year and kg of product.
- nitrogen uptake by plant: 176.62 kg N/ha; name Nuptake_plant; lognormal variance with pedigree 0.0573, pedigree (4,3,4,3,4)
  N taken by plant during its growth. Used in the SQCB-NO3 model for the calculation of leaching of NO3. From Bernardi (2012).
- organic nitrogen into soil: 5520.7 kg N/ha; name Norg_soil; lognormal variance with pedigree 0.0573, pedigree (4,3,4,3,4)
  Mass of organic N contained in the upper 50 cm of soil per ha. Used in the SQCB-NO3 model for the calculation of leaching of NO3. From Folegatti et al. (2015).
- precipitation, annual: 1201.3 mm/year; name precipitation; lognormal variance with pedigree 0.0573, pedigree (4,3,4,3,4)
  Average annual precipitation in the BR-CO geographic region. Used in the SQCB-NO3 model for the calculation of leaching of NO3.
- rooting depth: 0.2205 m; name root_depth; lognormal variance with pedigree 0.0573, pedigree (4,3,4,3,4)
  Plant rooting depth for pasture. Used in the SQCB-NO3 model for the calculation of leaching of NO3. From Cunha et al. (2010).
- soil eroded: 200 kg/ha.yr; name soil_eroded; lognormal variance with pedigree 0.0573, pedigree (4,3,4,3,4)
  Soil eroded. Used for the calculation of P emissions through water erosion to surface water. From Macedo et al. (2005).
- total nitrogen: 86.5412 kg/ha; name Ntot; = (N_ex + N_urea_fert + N_fert) / (T_t * 10^-4); lognormal variance with pedigree 0.0573, pedigree (4,3,4,3,4)
  Total nitrogen in mineral and organic fertilisers (kg N/ha)
- urea, as N, as feed: 0.006981 kg; name N_urea_feed; lognormal variance with pedigree 0.0573, pedigree (4,3,4,3,4)
  Urea for cattle feed.
- urea, as N, as fertilizer: 0 kg; name N_urea_fert
  Urea as fertilizer for pasture planting and maintenance.

## Reference product
- cattle for slaughtering, live weight: 1 kg; name REF_PRODUCT; By-product classification allocatable product; CPC 02111: Cattle
  production volume 3.47779e10 kg
    (GLO beef production in 2015) * (% of system in GLO in 2015) * (1 - % beef production from milk cattle in GLO) / (carcass as live weight, GLO average)
  property carbon content, non-fossil 0.4928; name REF_PRODUCT_C_content_non_fossil
    Calculated from live weight empty body composition in fat and protein (
    Johnson, I.R. et al. (2012). J. Anim. Sci. 90(13):4741-475 ; Williams, C.B. (2005). J. Anim. Sci. 83(6):1262-1266) and from C content of nutrients (protein, fat) according to A.D. Kay and T. Vrede ('Evolutionary and Biochemical Aspects', in Global Ecology, 2010, Elsevier B.V., S.E. Jørgensen Ed.).
  property dry mass 0.6 kg; name REF_PRODUCT_DM; = REF_PRODUCT_WM - REF_PRODUCT_WWM
  property energy content 14.9367 MJ; name REF_PRODUCT_energy_content
    Energy content calculated from animal fat and protein composition and energy content for animal fat and protein of 39.3 and 23.6 MJ/kg, respectively.
    Johnson, I.R. et al. (2012). J. Anim. Sci. 90(13):4741-475.
    Williams, C.B. (2005). J. Anim. Sci. 83(6):1262-1266.
  property price 2.025 EUR2005
    Calculated as an average of the regional prices (ZA and BR) which were provided by the data providers for the specific countries.
  property water in wet mass 0.4 kg; name REF_PRODUCT_WWM
  properties: carbon allocation 0.29568 kg, carbon content 0.4928, carbon content, fossil 0, water content 0.666667, wet mass 1 kg

## Inputs from technosphere
- fertilising, by broadcaster: 0.0014248 ha; lognormal variance with pedigree 0.0439, pedigree (3,3,5,3,2)
- inorganic nitrogen fertiliser, as N: 3.91625e-5, 0.000701089, 0.000527684, 0.00496211, 0.000404282, 6.54054e-6, 0.00260368, 2.43251e-5, 0.000143145, 3.38937e-5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 kg (29 suppliers, which the file names only by identifier); sum of these 0.039937 kg; = N_fert; lognormal variance with pedigree 0.0439, pedigree (3,3,5,3,2)
  Nitrogen fertilizer (not urea) for pasture fertilization.
  properties: dry mass 1 kg, wet mass 1 kg
- inorganic phosphorus fertiliser, as P2O5: 0.000588425, 0.000280319, 0.000356651, 9.20776e-5, 2.35915e-5, 0.000199029, 0.00659265, 0.000403616, 0.000184591, 1.31851e-5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 kg (29 suppliers, which the file names only by identifier); sum of these 0.045874 kg; lognormal variance with pedigree 0.0439, pedigree (3,3,5,3,2)
  Phosphate fertilizer for pasture replanting or maintenance.
  properties: dry mass 1 kg, wet mass 1 kg
- inorganic potassium fertiliser, as K2O: 0.00163196, 0.00018705, 2.23098e-6, 0.00575569, 0.000200201, 7.37397e-5, 1.08026e-5, 0.000137029, 0.000171433, 3.1175e-5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 kg (29 suppliers, which the file names only by identifier); sum of these 0.039398 kg; lognormal variance with pedigree 0.0439, pedigree (3,3,5,3,2)
  Potassium fertilizer for pasture replanting and maintenance.
  properties: dry mass 1 kg, wet mass 1 kg
- iron scrap, unsorted: -0.00083638 kg; name BY_PRODUCT_3; = wire
  Fencing the farm: steel wire.
  production volume
    Calculated from production volume of reference product using the relative outputs.
  properties: dry mass 1 kg, price 0.149 EUR2005, wet mass 1 kg
- lime: 0.0390979, 0.446622 kg (2 suppliers, which the file names only by identifier); sum of these 0.48572 kg; lognormal variance with pedigree 0.0439, pedigree (3,3,5,3,2)
  Lime applied for pasture replanting or maintenance.
  properties: carbon content, fossil 0.120005, dry mass 1 kg, wet mass 1 kg
- limestone and gypsum application, by spreader: 0.00032382 ha; lognormal variance with pedigree 0.0439, pedigree (3,3,5,3,2)
- maize grain: 0.000271493, 0.134959 kg (2 suppliers, which the file names only by identifier); sum of these 0.13523 kg; lognormal variance with pedigree 0.0439, pedigree (3,3,5,3,2)
  For cattle feed.
  properties: carbon content, non-fossil 0.46957, dry mass 0.86 kg, energy content 15.927 MJ, water content 0.162791, wet mass 1 kg
- mowing, by rotary mower: 0.0019429 ha; lognormal variance with pedigree 0.0439, pedigree (3,3,5,3,2)
  To be replaced by as activity link to new BR dataset for weed control, by brush cutter, pasture
- sawlog and veneer log, eucalyptus ssp., measured as solid wood under bark: 3.32737e-10, 4.74153e-8 m3 (2 suppliers, which the file names only by identifier); sum of these 4.7748e-8 m3; lognormal variance with pedigree 0.0439, pedigree (3,3,5,3,2)
  Fencing the farm: roundwood from eucalyptus for poles.
  properties: carbon content, non-fossil 0.494, dry mass 825 kg, heating value, net 11336.5 MJ, water content 0.5, wet mass 1237.5 kg
- sowing: 0.00032382 ha; lognormal variance with pedigree 0.0439, pedigree (3,3,5,3,2)
- soybean meal: 0.028836 kg; name MEAL; lognormal variance with pedigree 0.0439, pedigree (3,3,5,3,2)
  For concentrate formulation.
  property energy content 19.7 MJ; name MEAL_energy_content
  properties: carbon content, non-fossil 0.475627, dry mass 0.89 kg, water content 0.123596, wet mass 1 kg
- tillage, harrowing, by offset disc harrow: 0.00032382 ha; lognormal variance with pedigree 0.0439, pedigree (3,3,5,3,2)
- tillage, harrowing, by offset leveling disc harrow: 0.00064763 ha; lognormal variance with pedigree 0.0439, pedigree (3,3,5,3,2)
- urea: 0.000885633, 0.00700261, 0.00597973, 0.00109789 kg (4 suppliers, which the file names only by identifier); sum of these 0.0149659 kg; = (N_urea_feed + N_urea_fert)*2.14379903903132; lognormal variance with pedigree 0.0439, pedigree (3,3,5,3,2)
  The exchange has been updated from 'urea, as N' into 'urea' and therefore its amount has been scaled (multiplied) from 0.007 kg by 2.1438 kg of 'urea' per kg of 'urea, as N'. Original comment of the exchange is: Urea for cattle feed and pasture fertilization.
  properties: carbon content, fossil 0.2, dry mass 1 kg, wet mass 1 kg
- waste wood pole, chrome preserved: -8.79409e-7, -5.82087e-5 kg (2 suppliers, which the file names only by identifier); sum of these -5.90882e-5 kg; = poles*1237.5
  Fencing the farm: waste wood poles from fences (after periodic replacement).
  production volume
    Calculated from production volume of reference product using the relative outputs.
  properties: carbon content, non-fossil 0.483676, dry mass 0.8 kg, heating value, net 13.99 MJ, water content 0.25, wet mass 1 kg
  note on heating value, net: Value taken from the general comment of the treatment dataset.
- weaned calves, live weight: -0.00245508, -0.0237549 kg (2 suppliers, which the file names only by identifier); sum of these -0.02621 kg; lognormal variance with pedigree 0.0119, pedigree (3,3,4,3,2)
  Weaned calves sold.
  production volume
    Calculated from production volume of reference product using the relative outputs.
  properties: carbon content, non-fossil 0.4928, dry mass 0.6 kg, energy content 14.937 MJ, price 1.835 EUR2005, water content 0.666667, wet mass 1 kg
- weaned heifers, live weight: -0.0118245, -0.0118245 kg (2 suppliers, which the file names only by identifier); sum of these -0.023649 kg; lognormal variance with pedigree 0.0119, pedigree (3,3,4,3,2)
  Weaned heifers sold.
  production volume
    Calculated from production volume of reference product using the relative outputs.
  properties: carbon content, non-fossil 0.4928, dry mass 0.6 kg, energy content 14.937 MJ, price 1.64 EUR2005, water content 0.666667, wet mass 1 kg
- weed control, by brush cutter, pasture: 0.0019429 ha; lognormal variance with pedigree 0.0439, pedigree (3,3,5,3,2)
- wire drawing, steel: 0.00083638 kg; name wire; lognormal variance with pedigree 0.0439, pedigree (3,3,5,3,2)
  Fencing the farm: steel wire.
- wood preservation, vacuum pressure method, inorganic salt, containing Cr, outdoor use, ground contact: 4.1398e-5 kg; name WOOD; lognormal variance with pedigree 0.0439, pedigree (3,3,5,3,2)
  Fencing the farm: poles preservation by treatment with inorganic CCB (chromium, copper, boron) salt with the vacuum pressure method. Emissions in farm or after used were not included.
- zinc coat, pieces: 0.00019863 m2; lognormal variance with pedigree 0.0439, pedigree (3,3,5,3,2)
  Fencing the farm: steel wire zinc coating.

## Inputs from nature
- Energy, gross calorific value, in biomass [natural resource, biotic]: 12.9596 MJ; = REF_PRODUCT_energy_content + BY_PRODUCT_energy_content * BY_PRODUCT + BY_PRODUCT_2_energy_content * BY_PRODUCT_2 - MAIZE_energy_content * MAIZE - MEAL_energy_content * MEAL; lognormal variance with pedigree 0.0439, pedigree (3,3,5,3,2)
  Balance of energy content, considering product, by-product and the main exchanges from technosphere, only.
- Occupation, pasture, man made [natural resource, land]: 64.763 m2*year; name T_t; lognormal variance with pedigree 0.0453, pedigree (3,3,5,3,2)
  From Folegatti et al. (2015).
- Transformation, from pasture, man made [natural resource, land]: 3.23815 m2; = T_t*1/20; lognormal variance with pedigree 0.0513, pedigree (3,3,5,3,2)
  From Folegatti et al. (2015).
- Transformation, to pasture, man made [natural resource, land]: 3.23815 m2; = T_t*1/20; lognormal variance with pedigree 0.0513, pedigree (3,3,5,3,2)
  From Folegatti et al. (2015).

## Emissions to nature
- Ammonia [air, non-urban air or from high stacks]: 0.0324536 kg; name NH3; = 17/14 * (N_fert*0.20 + N_ex*0.6*0.06); lognormal variance with pedigree 0.0513, pedigree (3,3,5,3,2)
  NH3 emissions from applied mineral fertilisers are calculated by constant emission factors for each group of fertiliser. For Urea 20%. See Nemecek et al. (2015).
- Carbon dioxide, fossil [air, non-urban air or from high stacks]: 0.294228 kg; = 44/12 * 0.13 * lime + 1.57 * N_fert; lognormal variance with pedigree 0.0439, pedigree (3,3,5,3,2)
  Emissions of CO2 to air from limestone and urea application based on IPCC (2006).
- Dinitrogen monoxide [air, non-urban air or from high stacks]: 0.0191372 kg; name N2O; = N2O_feedlot + 44/28*((0.01*(N_fert + Ncrop_residues)+ 0.01*14/17*NH3 + 0.0075*14/62*NO3) + N_ex* EF_N2O); lognormal variance with pedigree 0.0733, pedigree (3,3,5,3,2)
  Emissions of N2O to the air from pasture. See IPCC (2006).
- Methane, non-fossil [air, non-urban air or from high stacks]: 0.44 kg; lognormal variance with pedigree 0.0513, pedigree (3,3,5,3,2)
  Enteric fermentation and manure management (IPCC, 2006).
- Nitrogen oxides [air, non-urban air or from high stacks]: 0.00401881 kg; = N2O*0.21; lognormal variance with pedigree 0.0733, pedigree (3,3,5,3,2)
  Emissions of NOx to the air. See '2.5 EMISSIONS OF NOX TO THE AIR' in Nemecek and Schnetzer (2011).
- Cadmium II [soil, agricultural]: 0.00019784 kg; normal variance with pedigree 0.0626, pedigree (3,3,5,3,2)
  Emissions of heavy metals to soil and surface water estimated from mineral fertilisers and liming as recommended by Canals (2003) and regionalized following Folegatti et al. (2015).
- Chromium III [soil, agricultural]: 0.0016474 kg; normal variance with pedigree 0.0626, pedigree (3,3,5,3,2)
  (same comment as for Cadmium II)
- Copper ion [soil, agricultural]: 0.01331 kg; normal variance with pedigree 0.0626, pedigree (3,3,5,3,2)
  (same comment as for Cadmium II)
- Lead II [soil, agricultural]: 0.001723 kg; normal variance with pedigree 0.0626, pedigree (3,3,5,3,2)
  (same comment as for Cadmium II)
- Nickel II [soil, agricultural]: 0.0025517 kg; normal variance with pedigree 0.0626, pedigree (3,3,5,3,2)
  (same comment as for Cadmium II)
- Zinc II [soil, agricultural]: 0.061149 kg; normal variance with pedigree 0.0626, pedigree (3,3,5,3,2)
  (same comment as for Cadmium II)
- Cadmium II [water, surface water]: 1.9786e-8 kg; normal variance with pedigree 0.1126, pedigree (3,3,5,3,2)
  (same comment as for Cadmium II)
- Chromium III [water, surface water]: 1.6475e-7 kg; normal variance with pedigree 0.1126, pedigree (3,3,5,3,2)
  (same comment as for Cadmium II)
- Copper ion [water, surface water]: 1.3312e-6 kg; normal variance with pedigree 0.1126, pedigree (3,3,5,3,2)
  (same comment as for Cadmium II)
- Lead II [water, surface water]: 1.7232e-7 kg; normal variance with pedigree 0.1126, pedigree (3,3,5,3,2)
  (same comment as for Cadmium II)
- Nickel II [water, surface water]: 2.552e-7 kg; normal variance with pedigree 0.1126, pedigree (3,3,5,3,2)
  (same comment as for Cadmium II)
- Nitrate [water, ground-]: 0.650108 kg; name NO3; = T_t*10^-4 * 62/14 * (( 21.37 + precipitation / ( Clay_content * root_depth) * (0.0037 * Ntot + 0.0000601 * Norg_soil - 0.00362 * Nuptake_plant))); lognormal variance with pedigree 0.0439, pedigree (3,3,5,3,2)
  See '2.2.2 The SQCB-NO3 model' in Nemececk & Schnetzer (2011), as 'SALCA-NO3 model' has 'Geographic scope of application: Europe'.
- Phosphorus [water, surface water]: 0.000457745 kg; = T_t*10^-4 * soil_eroded * 0.00095 * 1.86 * 0.2; lognormal variance with pedigree 0.0833, pedigree (3,3,5,3,2)
  As phosphorus leaching must be disregarded due to its low mobility in Brazilian soils (Novais & Smyth, 1999), only P emission by water erosion through surface water was considered, as in '2.3.3 Phorsphorous Emissions Through Water Erosion to Surface Water' Nemecek and Schnetzer (2011).
- Zinc II [water, surface water]: 6.1155e-6 kg; normal variance with pedigree 0.1126, pedigree (3,3,5,3,2)
  (same comment as for Cadmium II)

## Sampling procedure
Inventory data for cattle systems obtained from Embrapa’s PECUS Project, literature and expert knowledge. Emissions from the agricultural process estimated according to Nemecek and Schnetzer (2011) and Canals (2003) and other references mentioned.

## Extrapolations
Carbon content, water and gross calorific value are based on ecoinvent database.
