# rice production, non-basmati

Dataset: EcoSpold 2, unit process
Geography: CN
Time period: 2009-01-01 to 2022-12-31
Technology level: current
Classification: ISIC rev.4 ecoinvent: 0112:Growing of rice
Tags: WFLDB
Scenario: Business-as-Usual
System model: Substitution, consequential, long-term
Generated by: Eliane Riedener
Published in: Nemecek T. 2015
Database: ecoinvent
isCopyrightProtected: true

## General comment
This dataset represents the production of 1 kg of rice grains, at standard water content required for storage (13.1%). The average yield from 2009 - 2012 is 6.6 t/ha. The data are representative for a double rice cropping system in Southern China (Hunan province), representing the largest rice-producing province of China. Mineral NPK fertiliser input is 72-23-26 kg/ha. No organic fertilisers are applied. Total active ingredients (a.i.) applied as pesticides amount to 3.55 kg a.i./ha.
The dataset was modelled within the project 'World Food LCA database (WFLDB)'. The aim of this project was to provide inventories of a broad variety of agricultural products and processes and to cover for each product at least 50% of the global export market. The share of rice produced in China amounts to 28% of the global production (tonnage produced in 2010). The production system regarded in this dataset aimed at representing rice produced in China for the export market.
PEF-Quality: data quality rating (DQR) = 1.7 (i.e. very good quality). This dataset refers to an average situation; for specific situations exchanges might differ substantially due to site specific parameters
[This dataset is meant to replace the following datasets:
- rice production, CN, 2009 - 2012]

## Included activities start
This activity starts with soil cultivation after the harvest of the previous crop.

## Included activities end
This activity ends with the harvest of rice grains and subsequent burning of crop residues. A winter fallow is following the harvest of late rice, where no irrigation is applied. The dataset includes all machine operations, corresponding infrastructure, fuel use and sheds. Machine operations are: rotary tillage, the application of pesticides and fertilizers, irrigation and harvesting, and on-farm transport. Rice seedlings are transplanted manually by throwing the seedlings in the standing water. Paddy rice is grown under flooded conditions (~40-50 mm water depth) for the entire growing season except for the aeration stage and one week prior to harvest (i.e. ~80 days under flooded conditions per crop cycle). Further, direct field emissions and land use change are included. Heavy metal uptake by the crop is considered. In the considered region of China, rice is produced in a double rice cropping system (two crop cycles). Therefore, an average of the two crop cycles was used for the considered inputs. The inputs of seeds, irrigation water, fertilisers and pesticides as well as packaging of fertilisers and pesticides are considered. The dataset doesn't include a) grain drying, as no information was available and b) the production of rice seedlings (seeds are used as input).
Statistical data from FAO used to assess land use change is incomplete for China. The original land use of 40.9% of annual cropland and 100% of perennial cropland transformed in the last 20 years is unknown. Land use change impacts may therefore be underestimated.

## Technology
Conventional production

## Parameters
- LUC_crop_specific: 1 dimensionless
  This parameter allows to switch between a 'crop specific' and a 'country specific' approach when calculating the LUC of a crop. By default, the chosen approach is 'crop specific', so the value of the parameter is 1. If you want to apply a 'country specific' approach, turn the parameter to 0.
- heavyMetalUptakeSwitch: 1 dimensionless

## Reference product
- rice, non-basmati: 1 kg; By-product classification allocatable product; CPC 0113: Rice
  Reference flow: Yield = 6639.3 kg/ha
  production volume 2.11091e11 kg
    Production quantity of rice, paddy in China in 2016 as reported in FAOSTAT.
    Reference: Food and Agricultural Organization of the United Nations, 2018, Crops data, available online at: http://www.fao.org/faostat/en/#data/QC
  property energy content 15.4077 MJ; name REF_PRODUCT_energy_content
    as gross calorific value (when relevant)
  property price 0.37 EUR2005
    Calculated value based on data from United Nations Commodity Trade Statistics Database (comtrade.un.org). UN comtrade category: 1006 Rice. Year 2005. Using exchange rate of 1EURO = 1.209 USD. Average of price of import into 5 main markets (EU, US, JP, IN and CN).
  properties: carbon allocation 0.403784 kg, carbon content 0.46412, carbon content, fossil 0, carbon content, non-fossil 0.46412, dry mass 0.87 kg, water content 0.149425, water in wet mass 0.13 kg, wet mass 1 kg

## Inputs from technosphere
- [sulfonyl]urea-compound: 3.57022e-7 kg; lognormal variance with pedigree 0.0138498, pedigree (2,2,4,1,1)
  Proxy: Source for total amount of pesticides: literature (Xue et al. 2014). Active ingredient is calculated based on Ecoinvent dataset 'Rice, at farm/US U'. For calculations see supporting documentation 'WFLDB-Documentation.pdf' (https://ecoquery.ecoinvent.org/File/Reports).
  properties: carbon content, fossil 0.540853, dry mass 1 kg, wet mass 1 kg
- [thio]carbamate-compound: 0.000168848 kg; lognormal variance with pedigree 0.0138498, pedigree (2,2,4,1,1)
  (same comment as for [sulfonyl]urea-compound)
  properties: carbon content, fossil 0.626349, dry mass 1 kg, wet mass 1 kg
- acetamide-anillide-compound, unspecified: 0.000277095 kg; lognormal variance with pedigree 0.0138498, pedigree (2,2,4,1,1)
  (same comment as for [sulfonyl]urea-compound)
  properties: carbon content, fossil 0.659175, dry mass 1 kg, wet mass 1 kg
- application of plant protection product, by field sprayer: 0.000595319 ha; lognormal variance with pedigree 0.124664, pedigree (2,2,4,1,1)
  Proxy: Extrapolated using a modified MEXALCA-approach (Roches et al. 2010; Nemecek et al. 2012). See supporting documentation 'WFLDB-Documentation.pdf' chapter 'Machinery processes' for L1 data (https://ecoquery.ecoinvent.org/File/Reports).
- benzo[thia]diazole-compound: 4.04617e-6 kg; lognormal variance with pedigree 0.0138498, pedigree (2,2,4,1,1)
  (same comment as for [sulfonyl]urea-compound)
  properties: carbon content, fossil 0.499869, dry mass 1 kg, wet mass 1 kg
- bipyridylium-compound: 1.81814e-7 kg; lognormal variance with pedigree 0.0138498, pedigree (2,2,4,1,1)
  (same comment as for [sulfonyl]urea-compound)
  properties: carbon content, fossil 0.418929, dry mass 1 kg, wet mass 1 kg
- combine harvesting: 0.000150618 ha; source Xue J.F. 2014; lognormal variance with pedigree 0.124177, pedigree (2,1,4,1,1)
  Literature value or expert estimation (Xue et al. 2014).
- cyclic N-compound: 1.98742e-5 kg; lognormal variance with pedigree 0.0138498, pedigree (2,2,4,1,1)
  (same comment as for [sulfonyl]urea-compound)
  properties: carbon content, fossil 0.641962, dry mass 1 kg, wet mass 1 kg
- dinitroaniline-compound: 9.83783e-6 kg; lognormal variance with pedigree 0.0138498, pedigree (2,2,4,1,1)
  (same comment as for [sulfonyl]urea-compound)
  properties: carbon content, fossil 0.55516, dry mass 1 kg, wet mass 1 kg
- fertilising, by broadcaster: 0.000301237 ha; source Xue J.F. 2014; lognormal variance with pedigree 0.124177, pedigree (2,1,4,1,1)
  Literature value or expert estimation (Xue et al. 2014).
- glyphosate: 1.4439e-5 kg; lognormal variance with pedigree 0.0138498, pedigree (2,2,4,1,1)
  (same comment as for [sulfonyl]urea-compound)
  properties: carbon content, fossil 0.214286, dry mass 1 kg, wet mass 1 kg
- inorganic phosphorus fertiliser, as P2O5: 0.00338891 kg; source Xue J.F. 2014; lognormal variance with pedigree 0.124177, pedigree (2,1,4,1,1)
  Calculated based on literature values or expert estimation: The total amount of nutrient (Xue et al. 2014) multiplied by the share of fertiliser type (Personal written communication, Miles Harriman, Yara, 2015). See supporting documentation 'WFLDB-Documentation.pdf' chapter 'Fertiliser application' for L3 and L4 data (https://ecoquery.ecoinvent.org/File/Reports).
  Corresponds to 22.5 kg/ha
  properties: dry mass 1 kg, wet mass 1 kg
- irrigation: 0.6326 m3; source Xue J.F. 2014; lognormal variance with pedigree 0.124177, pedigree (2,1,4,1,1)
  Calculated value: The total amount of water used for irrigation (Xue et al. 2014) multiplied by the country-share of irrigation technique (WFLDB-Guidelines.pdf, Appendix 6.1). See supporting documentation 'WFLDB-Documentation.pdf' chapter 'Water use for irrigation' (https://ecoquery.ecoinvent.org/File/Reports).
  properties: dry mass 0.11 kg, water content 9089.91, wet mass 1000 kg
- organophosphorus-compound, unspecified: 1.33985e-5 kg; lognormal variance with pedigree 0.0138498, pedigree (2,2,4,1,1)
  (same comment as for [sulfonyl]urea-compound)
  properties: carbon content, fossil 0.260898, dry mass 1 kg, wet mass 1 kg
- phenoxy-compound: 2.66177e-5 kg; lognormal variance with pedigree 0.0138498, pedigree (2,2,4,1,1)
  (same comment as for [sulfonyl]urea-compound)
  properties: carbon content, fossil 0.532559, dry mass 1 kg, wet mass 1 kg
- potassium chloride: 0.00625835 kg; source Xue J.F. 2014; lognormal variance with pedigree 0.124177, pedigree (2,1,4,1,1)
  The exchange has been updated from 'potassium chloride, as K2O' into 'potassium chloride' and therefore its amount has been scaled (multiplied) from 0.004 kg by 1.5829 kg of 'potassium chloride' per kg of 'potassium chloride, as K2O'. Original comment of the exchange is: Calculated based on literature values or expert estimation: The total amount of nutrient (Xue et al. 2014) multiplied by the share of fertiliser type (Personal written communication, Miles Harriman, Yara, 2015). See supporting documentation 'WFLDB-Documentation.pdf' chapter 'Fertiliser application' for L3 and L4 data (https://ecoquery.ecoinvent.org/File/Reports).
  Corresponds to 26.3 kg/ha
  properties: dry mass 1 kg, wet mass 1 kg
- rice seed, for sowing: 0.0158149 kg; source Xue J.F. 2014; lognormal variance with pedigree 0.124177, pedigree (2,1,4,1,1)
  Literature value or expert estimation (Xue et al. 2014). Rice seed US used as proxy for seed process. Sowing density: 105kg/ha.
  properties: carbon content, non-fossil 0.464122, dry mass 0.87 kg, water content 0.149425, wet mass 1 kg
- straw: -0.499977 kg; name BP
  Yield = 3319.5 kg/ha
  production volume
    Calculated from reference product production volume, reference product amount and byproduct amount.
  properties: carbon content, non-fossil 0.437377, dry mass 0.85 kg, heating value, net 14.25 MJ, price 0.012 EUR2005, water content 0.176471, wet mass 1 kg
  note on heating value, net: Literature value, Source: Phyllis2, database for (treated) biomass, algae, feedstocks for biogas production and biochar, https://phyllis.nl/Biomass/View/1271, ECN.TNO
- tillage, rotary cultivator: 0.000150618 ha; source Xue J.F. 2014; lognormal variance with pedigree 0.124177, pedigree (2,1,4,1,1)
  Literature value or expert estimation (Xue et al. 2014).
- transport, tractor and trailer, agricultural: 0.00200006 metric ton*km; source Xue J.F. 2014; lognormal variance with pedigree 0.162439, pedigree (4,1,4,1,1)
  On-farm transport: Yield (in tonnes) multiplied by the average distance from field to farm. The distance was assumed to be 2 km (proxy).
- urea: 0.0232485 kg; source Xue J.F. 2014; lognormal variance with pedigree 0.124177, pedigree (2,1,4,1,1)
  The exchange has been updated from 'urea, as N' into 'urea' and therefore its amount has been scaled (multiplied) from 0.0108 kg by 2.1438 kg of 'urea' per kg of 'urea, as N'. Original comment of the exchange is: Calculated based on literature values or expert estimation: The total amount of nutrient (Xue et al. 2014) multiplied by the share of fertiliser type (Personal written communication, Miles Harriman, Yara, 2015). See supporting documentation 'WFLDB-Documentation.pdf' chapter 'Fertiliser application' for L3 and L4 data (https://ecoquery.ecoinvent.org/File/Reports).
  Corresponds to 72.0 kg/ha
  properties: carbon content, fossil 0.2, dry mass 1 kg, wet mass 1 kg

## Inputs from nature
- Carbon dioxide, in air [natural resource, in air]: 1.48958 kg; lognormal variance with pedigree 0.0138498, pedigree (2,2,4,1,1)
  CO2 uptake by biomass
- Energy, gross calorific value, in biomass [natural resource, biotic]: 15.7803 MJ; lognormal variance with pedigree 0.0138498, pedigree (2,2,4,1,1)
  Gross energy content is related to MJ/kg dry matter of product. Source: ecoinvent data.
- Occupation, annual crop [natural resource, land]: 1.13066 m2*year; lognormal variance with pedigree 0.0200616, pedigree (2,1,4,1,1)
  Related to the duration from harvest date of previous crop to harvest date of main crop: 274 days.
- Transformation, from arable land, unspecified use [natural resource, land]: 1.50618 m2; lognormal variance with pedigree 0.0442144, pedigree (2,1,4,1,1)
  10000 m2 divided by the life time of the crop.
- Transformation, to arable land, unspecified use [natural resource, land]: 1.50618 m2; lognormal variance with pedigree 0.0442144, pedigree (2,1,4,1,1)
  10000 m2 divided by the life time of the crop.

## Emissions to nature
- Ammonia [air, non-urban air or from high stacks]: 0.00263522 kg; source EEA 2013; lognormal variance with pedigree 0.0447216, pedigree (2,2,4,1,1)
  Calculated value - EMEP/EEA (2013). See 'WFLDB-Guidelines.pdf', available at https://ecoquery.ecoinvent.org/File/Reports.
- Carbon dioxide, fossil [air, non-urban air or from high stacks]: 0.0170259 kg; lognormal variance with pedigree 0.0138498, pedigree (2,2,4,1,1)
  Calculated value - CO2 emissions from urea and lime. See 'WFLDB-Guidelines.pdf', available at https://ecoquery.ecoinvent.org/File/Reports.
- Dinitrogen monoxide [air, non-urban air or from high stacks]: 0.000304559 kg; source IPCC 2006; lognormal variance with pedigree 0.124664, pedigree (2,2,4,1,1)
  Calculated value - IPCC (2006). See 'WFLDB-Guidelines.pdf', available at https://ecoquery.ecoinvent.org/File/Reports.
- Methane, non-fossil [air, non-urban air or from high stacks]: 0.0106909 kg; lognormal variance with pedigree 0.124664, pedigree (2,2,4,1,1)
  Calculated value - IPCC (2006) - calculation adjusted for water regime during and before rice cultivation and organic amendments.. See 'WFLDB-Guidelines.pdf', available at https://ecoquery.ecoinvent.org/File/Reports.
- Nitrogen oxides [air, non-urban air or from high stacks]: 0.00042759 kg; source EEA 2013; lognormal variance with pedigree 0.124664, pedigree (2,2,4,1,1)
  Calculated value - EEA/EMEP (2013). See 'WFLDB-Guidelines.pdf', available at https://ecoquery.ecoinvent.org/File/Reports.
- Water [air, non-urban air or from high stacks]: 0.299384 m3; lognormal variance with pedigree 0.124177, pedigree (2,1,4,1,1)
  Calculated value - Emission calculated from water balance. See 'WFLDB-Guidelines.pdf', available at https://ecoquery.ecoinvent.org/File/Reports.
- 2,4-D [soil, agricultural]: 1.83157e-5 kg; lognormal variance with pedigree 0.0447216, pedigree (2,2,4,1,1)
  Calculated value - 100% emission in soil. See 'WFLDB-Guidelines.pdf', available at https://ecoquery.ecoinvent.org/File/Reports.
- Azoxystrobin [soil, agricultural]: 3.53067e-6 kg; lognormal variance with pedigree 0.0447216, pedigree (2,2,4,1,1)
  (same comment as for 2,4-D)
- Bensulfuron methyl ester [soil, agricultural]: 1.23318e-6 kg; lognormal variance with pedigree 0.0447216, pedigree (2,2,4,1,1)
  (same comment as for 2,4-D)
- Bentazone [soil, agricultural]: 3.97195e-6 kg; lognormal variance with pedigree 0.0447216, pedigree (2,2,4,1,1)
  (same comment as for 2,4-D)
- Cadmium II [soil, agricultural]: 1.54169e-7 kg; = 1.71569291943e-07 + ( - 1.74000271113e-08)*heavyMetalUptakeSwitch; source Freiermuth R.  2006
  Comment on mathematicalRelation:
  1.71569291943e-07 from Calculated value - Freiermuth (2006). See 'WFLDB-Guidelines.pdf', available at https://ecoquery.ecoinvent.org/File/Reports.
  -1.74000271113e-08 from Rice grains, heavy metals uptake model
  Heavy metal uptake can be excluded by setting the parameter heavyMetalUptakeSwitch to zero.
- Carbaryl [soil, agricultural]: 1.31098e-6 kg; lognormal variance with pedigree 0.0447216, pedigree (2,2,4,1,1)
  (same comment as for 2,4-D)
- Carbofuran [soil, agricultural]: 1.19418e-6 kg; lognormal variance with pedigree 0.0447216, pedigree (2,2,4,1,1)
  (same comment as for 2,4-D)
- Chromium III [soil, agricultural]: -4.7783e-7 kg; = -5.15295287154e-08 + ( - 4.26300664227e-07)*heavyMetalUptakeSwitch; source Freiermuth R.  2006
  Comment on mathematicalRelation:
  -5.15295287154e-08 from Calculated value - Freiermuth (2006). See 'WFLDB-Guidelines.pdf', available at https://ecoquery.ecoinvent.org/File/Reports.
  -4.26300664227e-07 from Rice grains, heavy metals uptake model
  Heavy metal uptake can be excluded by setting the parameter heavyMetalUptakeSwitch to zero.
- Clomazone [soil, agricultural]: 1.86917e-5 kg; lognormal variance with pedigree 0.0447216, pedigree (2,2,4,1,1)
  (same comment as for 2,4-D)
- Copper ion [soil, agricultural]: -4.36856e-6 kg; = 2.16348108987e-07 + ( - 4.58490714383e-06)*heavyMetalUptakeSwitch; source Freiermuth R.  2006
  Comment on mathematicalRelation:
  2.16348108987e-07 from Calculated value - Freiermuth (2006). See 'WFLDB-Guidelines.pdf', available at https://ecoquery.ecoinvent.org/File/Reports.
  -4.58490714383e-06 from Rice grains, heavy metals uptake model
  Heavy metal uptake can be excluded by setting the parameter heavyMetalUptakeSwitch to zero.
- Fenoxaprop [soil, agricultural]: 7.78819e-8 kg; lognormal variance with pedigree 0.0447216, pedigree (2,2,4,1,1)
  (same comment as for 2,4-D)
- Glyphosate [soil, agricultural]: 1.41741e-5 kg; lognormal variance with pedigree 0.0447216, pedigree (2,2,4,1,1)
  (same comment as for 2,4-D)
- Halosulfuron-methyl [soil, agricultural]: 3.50473e-7 kg; lognormal variance with pedigree 0.0447216, pedigree (2,2,4,1,1)
  (same comment as for 2,4-D)
- Lambda-cyhalothrin [soil, agricultural]: 5.06229e-7 kg; lognormal variance with pedigree 0.0447216, pedigree (2,2,4,1,1)
  (same comment as for 2,4-D)
- Lead II [soil, agricultural]: -6.25149e-7 kg; = 2.10052264546e-07 + ( - 8.35201301342e-07)*heavyMetalUptakeSwitch; source Freiermuth R.  2006
  Comment on mathematicalRelation:
  2.10052264546e-07 from Calculated value - Freiermuth (2006). See 'WFLDB-Guidelines.pdf', available at https://ecoquery.ecoinvent.org/File/Reports.
  -8.35201301342e-07 from Rice grains, heavy metals uptake model
  Heavy metal uptake can be excluded by setting the parameter heavyMetalUptakeSwitch to zero.
- MCPA [soil, agricultural]: 4.93252e-7 kg; lognormal variance with pedigree 0.0447216, pedigree (2,2,4,1,1)
  (same comment as for 2,4-D)
- Malathion [soil, agricultural]: 1.84972e-7 kg; lognormal variance with pedigree 0.0447216, pedigree (2,2,4,1,1)
  (same comment as for 2,4-D)
- Mecoprop-P [soil, agricultural]: 9.34585e-7 kg; lognormal variance with pedigree 0.0447216, pedigree (2,2,4,1,1)
  (same comment as for 2,4-D)
- Mercury II [soil, agricultural]: 6.27175e-9 kg; source Freiermuth R.  2006; lognormal variance with pedigree 0.175866, pedigree (2,2,4,1,1)
  Calculated value - Freiermuth (2006). See 'WFLDB-Guidelines.pdf', available at https://ecoquery.ecoinvent.org/File/Reports.
- Molinate [soil, agricultural]: 0.000105024 kg; lognormal variance with pedigree 0.0447216, pedigree (2,2,4,1,1)
  (same comment as for 2,4-D)
- Nickel II [soil, agricultural]: -5.27211e-7 kg; = 3.16690012501e-07 + ( - 8.43901314898e-07)*heavyMetalUptakeSwitch; source Freiermuth R.  2006
  Comment on mathematicalRelation:
  -8.43901314898e-07 from Rice grains, heavy metals uptake model
  Heavy metal uptake can be excluded by setting the parameter heavyMetalUptakeSwitch to zero.
- Paraquat [soil, agricultural]: 1.78478e-7 kg; lognormal variance with pedigree 0.0447216, pedigree (2,2,4,1,1)
  (same comment as for 2,4-D)
- Parathion [soil, agricultural]: 1.29672e-5 kg; lognormal variance with pedigree 0.0447216, pedigree (2,2,4,1,1)
  (same comment as for 2,4-D)
- Pendimethalin [soil, agricultural]: 9.65737e-6 kg; lognormal variance with pedigree 0.0447216, pedigree (2,2,4,1,1)
  (same comment as for 2,4-D)
- Propanil [soil, agricultural]: 0.000272012 kg; lognormal variance with pedigree 0.0447216, pedigree (2,2,4,1,1)
  (same comment as for 2,4-D)
- Propiconazole [soil, agricultural]: 8.17761e-7 kg; lognormal variance with pedigree 0.0447216, pedigree (2,2,4,1,1)
  (same comment as for 2,4-D)
- Quinclorac [soil, agricultural]: 4.54311e-6 kg; lognormal variance with pedigree 0.0447216, pedigree (2,2,4,1,1)
  (same comment as for 2,4-D)
- Thiobencarb [soil, agricultural]: 5.82167e-5 kg; lognormal variance with pedigree 0.0447216, pedigree (2,2,4,1,1)
  (same comment as for 2,4-D)
- Triclopyr [soil, agricultural]: 6.30844e-6 kg; lognormal variance with pedigree 0.0447216, pedigree (2,2,4,1,1)
  (same comment as for 2,4-D)
- Zinc II [soil, agricultural]: -3.50268e-5 kg; = 3.16629765186e-06 + ( - 3.81930595093e-05)*heavyMetalUptakeSwitch; source Freiermuth R.  2006
  Comment on mathematicalRelation:
  -3.81930595093e-05 from Rice grains, heavy metals uptake model
  Heavy metal uptake can be excluded by setting the parameter heavyMetalUptakeSwitch to zero.
- Cadmium II [water, ground-]: 3.52778e-9 kg; source Freiermuth R.  2006; lognormal variance with pedigree 0.356938, pedigree (2,2,4,1,1)
  Calculated value - Freiermuth (2006). See 'WFLDB-Guidelines.pdf', available at https://ecoquery.ecoinvent.org/File/Reports. This emission might be overestimated in case of basic soils.
- Cadmium II [water, surface water]: 1.75305e-9 kg; source Freiermuth R.  2006; lognormal variance with pedigree 0.356938, pedigree (2,2,4,1,1)
  (same comment as for Mercury II)
- Chromium III [water, ground-]: 1.88996e-6 kg; source Freiermuth R.  2006; lognormal variance with pedigree 0.356938, pedigree (2,2,4,1,1)
  (same comment as for Cadmium II)
- Chromium III [water, surface water]: 2.22267e-7 kg; source Freiermuth R.  2006; lognormal variance with pedigree 0.356938, pedigree (2,2,4,1,1)
  (same comment as for Mercury II)
- Copper ion [water, ground-]: 2.49123e-7 kg; source Freiermuth R.  2006; lognormal variance with pedigree 0.356938, pedigree (2,2,4,1,1)
  (same comment as for Cadmium II)
- Copper ion [water, surface water]: 1.54971e-7 kg; source Freiermuth R.  2006; lognormal variance with pedigree 0.356938, pedigree (2,2,4,1,1)
  (same comment as for Mercury II)
- Lead II [water, ground-]: 5.11816e-9 kg; source Freiermuth R.  2006; lognormal variance with pedigree 0.356938, pedigree (2,2,4,1,1)
  (same comment as for Cadmium II)
- Lead II [water, surface water]: 1.69897e-8 kg; source Freiermuth R.  2006; lognormal variance with pedigree 0.356938, pedigree (2,2,4,1,1)
  (same comment as for Mercury II)
- Mercury II [water, ground-]: 6.63715e-10 kg; source Freiermuth R.  2006; lognormal variance with pedigree 0.356938, pedigree (2,2,4,1,1)
  (same comment as for Cadmium II)
- Mercury II [water, surface water]: 3.90613e-10 kg; source Freiermuth R.  2006; lognormal variance with pedigree 0.356938, pedigree (2,2,4,1,1)
  (same comment as for Mercury II)
- Nickel II [water, ground-]: 2.03561e-10 kg; source Freiermuth R.  2006; lognormal variance with pedigree 0.356938, pedigree (2,2,4,1,1)
  (same comment as for Cadmium II)
- Nickel II [water, surface water]: 8.6964e-8 kg; source Freiermuth R.  2006; lognormal variance with pedigree 0.356938, pedigree (2,2,4,1,1)
  (same comment as for Mercury II)
- Nitrate [water, ground-]: 0.0213929 kg; source Faist Emmenegger M. 2009; lognormal variance with pedigree 0.175866, pedigree (2,2,4,1,1)
- Phosphate [water, ground-]: 2.42541e-5 kg; source Prasuhn V.  2006; lognormal variance with pedigree 0.175866, pedigree (2,2,4,1,1)
  Calculated value - Prasuhn (2006). See 'WFLDB-Guidelines.pdf', available at https://ecoquery.ecoinvent.org/File/Reports. This emission might be overestimated in case of basic soils.
- Phosphorus [water, surface water]: 6.75493e-6 kg; source Prasuhn V.  2006; lognormal variance with pedigree 0.175866, pedigree (2,2,4,1,1)
  Calculated value - Prasuhn (2006) and SQCB-Erosion. See 'WFLDB-Guidelines.pdf', available at https://ecoquery.ecoinvent.org/File/Reports.
- Water [water, ground-]: 0.0666441 m3; lognormal variance with pedigree 0.124177, pedigree (2,1,4,1,1)
  (same comment as for Water)
- Water [water, surface water]: 0.266579 m3; lognormal variance with pedigree 0.124177, pedigree (2,1,4,1,1)
  (same comment as for Water)
- Zinc II [water, ground-]: 8.24379e-7 kg; source Freiermuth R.  2006; lognormal variance with pedigree 0.356938, pedigree (2,2,4,1,1)
  (same comment as for Cadmium II)
- Zinc II [water, surface water]: 1.86194e-7 kg; source Freiermuth R.  2006; lognormal variance with pedigree 0.356938, pedigree (2,2,4,1,1)
  (same comment as for Mercury II)

## Sampling procedure
WFLDB Methodological Guidelines for the Life Cycle Inventory of Agricultural Products in the latest version, available at: (Report section: https://v30.ecoquery.ecoinvent.org/File/Reports). Data sources: Data were categorised from level 0 (L0) to level (L4) as follows: L0 = estimate, proxy; L1 = statistical data (e.g. FAOSTAT); L2 = L1 adapted to crop and country; L3 = literature data or L1 resp. L2 data approved by experts; medium detailing (i.e. kg of total N-fertiliser); L4 = L3 data of high detailing (i.e. portion N-fertiliser types).In this dataset data were obtained for yield: L3; Fertilisers: L4; Pesticides: L3; Machinery: L4; Irrigation: L3. For information regarding the calculation of individual exchanges see supporting documentation WFLDB-Documentation.pdf.

## Extrapolations
If used, extrapolations are documented on the flow level.
