# ethanol production from wood

Dataset: EcoSpold 2, unit process
Geography: RoW
Time period: 1999-01-01 to 2022-12-31
Technology level: current
Classification: EcoSpold01Categories: biomass/fuels
Classification: ISIC rev.4 ecoinvent: 2011:Manufacture of basic chemicals
Tags: ConvertedDataset
Scenario: Business-as-Usual
System model: Substitution, consequential, long-term
Share of production covered: 0 %
Generated by: Edgard Gnansounou
Published in: Jungbluth N. 2007
Database: ecoinvent
isCopyrightProtected: true

## General comment
Inventory refers to the production of 1 kg hydrated ethanol 95% (dry basis, i.e. 1.05 kg hydrated ethanol 95% wet basis), respectively 1 kWh of electricity from wood (u=80%, i.e. 55% dry matter). The multioutput-process 'wood, in distillery' delivers the co-products 'ethanol, 95% in H2O, from wood, at distillery' and 'electricity, from wood, at distillery'. Economic allocation with allocation factor for common stages of 99.7% to ethanol. Allocation is done according to carbon balance for CO2 emissions.
[This dataset was already contained in the ecoinvent database version 2. It was not individually updated during the transfer to ecoinvent version 3. Life Cycle Impact Assessment results may still have changed, as they are affected by changes in the supply chain, i.e. in other datasets. This dataset was generated following the ecoinvent quality guidelines for version 2. It may have been subject to central changes described in the ecoinvent version 3 change report (http://www.ecoinvent.org/database/ecoinvent-version-3/reports-of-changes/), and the results of the central updates were reviewed extensively. The changes added e.g. consistent water flows and other information throughout the database. The documentation of this dataset can be found in the ecoinvent reports of version 2, which are still available via the ecoinvent website. The change report linked above covers all central changes that were made during the conversion process.]

## Included activities end
This dataset includes the transport of wood from the forest to the distillery, and the processing of wood (u=80%) to hydrated ethanol (95%) and electricity. System boundary is at the distillery. Dehydration to anhydrous ethanol is not included. Process heat and power supply is ensured by the combustion of unconverted solids.

## Geography
Data is adapted to Swiss conditions from NREL ethanol process design from yellow poplar (1999)

## Technology
Ethanol is produced by dilute acid pre-hydrolysis and simultaneous saccharification and co-fermentation (SSCF) of lignocellulosic biomass. Process heat and power supply is ensured by the combustion of unconverted solids. Excess electricity is exported to the power grid.

## Time period
Data from 1999 to 2006, pilot scale, near-future technology

## Parameters
- fraction, cooling water, cooling pond system, to air: 0.032 dimensionless; name fraction_CW_CP_to_air; lognormal variance with pedigree 0.0413, pedigree (2,3,1,3,1)
  Calculated based on literature value (Scown, C.D., 2011, Water Footprint of U.S. Transportation Fuels and supplying information of the article) (Vionnet, S., Quantis Water Database - Technical Report, 2012).
- fraction, cooling water, once-through system, to air: 0.004 dimensionless; name fraction_CW_OT_to_air; lognormal variance with pedigree 0.0413, pedigree (2,3,1,3,1)
  (same comment as for fraction, cooling water, cooling pond system, to air)
- fraction, cooling water, recirculating system, to air: 0.771 dimensionless; name fraction_CW_R_to_air; lognormal variance with pedigree 0.0413, pedigree (2,3,1,3,1)
  (same comment as for fraction, cooling water, cooling pond system, to air)
- fraction, cooling water, to air: 0.64 dimensionless; lognormal variance with pedigree 0.092025, pedigree (4,4,3,2,4)
- fraction, process water, to air: 0.930167 dimensionless; lognormal variance with pedigree 0.092025, pedigree (4,4,3,2,4)
- fraction, tap water, to air: 0.930167 dimensionless; lognormal variance with pedigree 0.092025, pedigree (4,4,3,2,4)
- fraction, water, decarbonised, to air: 0.64 dimensionless; lognormal variance with pedigree 0.092025, pedigree (4,4,3,2,4)

## Reference product
- ethanol, without water, in 95% solution state, from fermentation: 1 kg; name RP_amount_1; By-product classification allocatable product; CPC 35491: Biodiesel; CAS 64-17-5
  EcoSpold01Location=CH
  production volume 2.01383e9 kg
    Calculated based on literature and estimates.
    Density of bioethanol: 0.79 kg/l (ecoinvent v2 report no. 17).
    51293 Ml is the annual production of bioethanol in the world in 2007 (http://www.biofuels-platform.ch/en/infos/production.php). Based on literature it is estimated that 5% of this bio-ethanol is produced from wood (UNEP; http://www.grida.no/graphicslib/detail/global-ethanol-production_e8b4#, accessed 20121127; Brookhaven National Laboratory, US, http://www.bnl.gov/isd/documents/43476.pdf, accessed 20121127; Beca, NZ, http://www.beca.com/markets/industrial/~/media/publications/technical_papers/bioethanol.ashx, accessed 20121127).
  property heating value, net 28.1 MJ
    Based on literature, page 275, Report 17: Jungbluth, N., Chudacoff, M., Dauriat, A., Dinkel, F., Doka, G., Faist Emmenegger, M., Gnansounou, E., Kljun, N., Schleiss, K., Spielmann, M., Stettler, C., Sutter, J. 2007: Life Cycle Inventories of Bioenergy. ecoinvent report No. 17, Swiss Centre for Life Cycle Inventories, Dübendorf, CH.
  property price 0.324 EUR2005
    Temporary price data. Calculated as 90% of purchasers price based on: 2005 prices from FAPRI2007, 2009. Agricultural outlook. (http://www.fapri.missouri.edu/outreach/publications/ag_outlook.asp?current_page=outreach; accessed 22/06/10). Unit conversion from US gallon to kg - 1 gallon = 3.7856 liter * 0.789 kg/liter (ethanol density) = 2.9868 kg
  properties: carbon allocation 0.521739 kg, carbon content 0.521739, carbon content, fossil 0, carbon content, non-fossil 0.521739, dry mass 1 kg, water content 0, water in wet mass 0 kg, wet mass 1 kg

## Inputs from technosphere
- ammonia, anhydrous, liquid: 0.00185466, 0.000377347, 0.00360027, 0.0138682, 0.00168688, 0.00111707, 0.0399067, 0.00367473 kg (8 suppliers, which the file names only by identifier); sum of these 0.0660858 kg; lognormal variance with pedigree 0.0532, pedigree (2,3,5,5,1)
  Etha+ project Alcosuisse, SSCF technology from NREL
  EcoSpold01Location=CH
  Uncertainty: etha+ project Alcosuisse, SSCF technology from NREL
  properties: dry mass 1 kg, wet mass 1 kg
- ammonium sulfate: 0.00118447 kg; lognormal variance with pedigree 0.0532, pedigree (2,3,5,5,1)
  Etha+ project Alcosuisse, SSCF technology from NREL
  EcoSpold01Location=RER
  Uncertainty: etha+ project Alcosuisse, SSCF technology from NREL
  properties: dry mass 1 kg, wet mass 1 kg
- calcium chloride: 0.00120203 kg; lognormal variance with pedigree 0.0532, pedigree (2,3,5,5,1)
  EcoSpold01Location=CH
  Etha+ project Alcosuisse, SSCF technology from NREL
  Uncertainty: etha+ project Alcosuisse, SSCF technology from NREL
  properties: dry mass 1 kg, wet mass 1 kg
- chemical, organic: 0.000239406 kg; lognormal variance with pedigree 0.0532, pedigree (2,3,5,5,1)
  Etha+ project Alcosuisse, SSCF technology from NREL
  EcoSpold01Location=GLO
  Uncertainty: etha+ project Alcosuisse, SSCF technology from NREL
  properties: carbon content, fossil 0.628, dry mass 1 kg, heating value, net 19.03 MJ, wet mass 1 kg
  note on carbon content, fossil: This dataset is an unweighted average of 20 organic substances (listed in Tab 88.1, ecoinvent v2.2 report 8, part II), being part of the top100 chemicals included in this database. The C-content has also been calculated as an unweighted average of the C content of the substances composing this dataset.
- chlorine, liquid: 6.13089e-6 kg; lognormal variance with pedigree 0.072, pedigree (4,4,5,5,1)
  EcoSpold01Location=RER
  Adapted from the dataset 'wood chips, in cogen 6400kWth, wood, emission control', according to actual water, carbon and energy content of the fuel (unconverted solids, mainly lignin)
  Uncertainty: adapted from the dataset 'wood chips, in cogen 6400kWth, wood, emission control', according to actual water, carbon and energy content of the fuel (unconverted solids, mainly lignin)
  properties: dry mass 1 kg, wet mass 1 kg
- electricity, high voltage: -3.23128e-5, -2.67829e-5, -7.0864e-6, -9.07698e-5, -1.78084e-5, -0.000325845, -0.00012878, -6.4514e-7, -6.23223e-5, -3.83514e-5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 kWh (45 suppliers, which the file names only by identifier); sum of these -0.0450073 kWh
  EcoSpold01Location=CH
  production volume
    Production volume of ethanol for use as a fuel was 1-1.5 Ml in 2005 in CH
    Calculated relative to ethanol output
  properties: price 0.0977 EUR2005
- ethanol fermentation plant: 4.13734e-10 unit; lognormal variance with pedigree 0.3532, pedigree (2,3,5,5,1)
  (same comment as for ammonia, anhydrous, liquid)
- heat and power co-generation unit, 6400kW thermal, building: 4.52339e-9 unit; lognormal variance with pedigree 0.372, pedigree (4,4,5,5,1)
  EcoSpold01Location=CH
  Adapted from the dataset 'wood chips, in cogen 6400kWth, wood, emission control', according to actual water, carbon and energy content of the fuel (unconverted solids, mainly lignin)
  Uncertainty: adapted from the dataset 'wood chips, in cogen 6400kWth, wood, emission control', according to actual water, carbon and energy content of the fuel (unconverted solids, mainly lignin)
- heat and power co-generation unit, 6400kW thermal, common components for heat+electricity: 1.80936e-8 unit; lognormal variance with pedigree 0.372, pedigree (4,4,5,5,1)
  Adapted from the dataset 'wood chips, in cogen 6400kWth, wood, emission control', according to actual water, carbon and energy content of the fuel (unconverted solids, mainly lignin)
  EcoSpold01Location=CH
  Uncertainty: adapted from the dataset 'wood chips, in cogen 6400kWth, wood, emission control', according to actual water, carbon and energy content of the fuel (unconverted solids, mainly lignin)
- heat and power co-generation unit, 6400kW thermal, components for electricity only: 1.80936e-8 unit; lognormal variance with pedigree 0.372, pedigree (4,4,5,5,1)
  (same comment as for heat and power co-generation unit, 6400kW thermal, building)
- inorganic nitrogen fertiliser, as N: 8.88308e-6, 1.60458e-6, 2.87253e-5, 1.96023e-7, 2.16204e-5, 2.51687e-6, 1.82955e-6, 0.000203309, 1.65644e-5, 9.74326e-6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 kg (62 suppliers, which the file names only by identifier); sum of these 0.0016709 kg; lognormal variance with pedigree 0.0532, pedigree (2,3,5,5,1)
  EcoSpold01Location=RER
  Etha+ project Alcosuisse, SSCF technology from NREL
  Uncertainty: etha+ project Alcosuisse, SSCF technology from NREL
  properties: dry mass 1 kg, wet mass 1 kg
- lubricating oil: 6.13089e-5 kg; lognormal variance with pedigree 0.072, pedigree (4,4,5,5,1)
  (same comment as for chlorine, liquid)
  properties: carbon content, fossil 0.75, dry mass 1 kg, heating value, net 40.2 MJ, wet mass 1 kg
  note on carbon content, fossil: Lubricating oil is produced from diesel. C-content/dry mass of fats and oils considered 75%, from: ecoinvent v2.2 report, n 15a, pg 40
  note on heating value, net: Literature value, Source: IPCC 2006, 2006 IPCC Guidelines for National Greenhouse Gas Inventories, Prepared by the National Greenhouse Gas Inventories Programme, Eggleston H.S., Buendia L., Miwa K., Ngara T. and Tanabe K. (eds). Published: IGES, Japan
- magnesium sulfate: 0.000544778 kg; lognormal variance with pedigree 0.0532, pedigree (2,3,5,5,1)
  (same comment as for inorganic nitrogen fertiliser, as N)
  properties: dry mass 1 kg, wet mass 1 kg
- maize starch: 0.0264682 kg; lognormal variance with pedigree 0.0532, pedigree (2,3,5,5,1)
  EcoSpold01Location=DE
  Etha+ project Alcosuisse, SSCF technology from NREL
  Uncertainty: etha+ project Alcosuisse, SSCF technology from NREL
  properties: carbon content, non-fossil 0.46, dry mass 0.86 kg, heating value, net 11.64 MJ, water content 0.162791, wet mass 1 kg
  note on carbon content, non-fossil: C-content of starch is considered 46% on dry mass basis (from "Evolutionary and Biochemical Aspects", A.D. Kay and T. Vrede (in Global Ecology, 2010, Elsevier B.V., S.E. Jørgensen Ed.)).
- municipal solid waste: -7.52659e-8, -4.16223e-8, -5.48933e-7, -5.69096e-7, -1.3657e-7, -4.61636e-8, -7.276e-8, -1.0737e-8, -2.88369e-8, -1.47102e-7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 kg (38 suppliers, which the file names only by identifier); sum of these -6.13089e-5 kg; lognormal variance with pedigree 0.0322, pedigree (4,4,2,5,1)
  (same comment as for heat and power co-generation unit, 6400kW thermal, common components f)
  production volume
    Calculated from the production volume of ethanol, without water, in 95% solution state, from fermentation in proportion to the respective output amounts.
  properties: carbon content, fossil 0.171549, carbon content, non-fossil 0.261655, dry mass 0.771 kg, heating value, net 11.74 MJ, water content 0.297017, wet mass 1 kg
  note on carbon content, fossil: MSW composition in tab 4.1, ecoinvent v2.2 report 13_I. C content referred to 1 kg DM
  note on heating value, net: Value taken from the general comment of the treatment dataset.
- quicklime, in pieces, loose: 0.0321729 kg; lognormal variance with pedigree 0.0532, pedigree (2,3,5,5,1)
  (same comment as for ammonia, anhydrous, liquid)
  properties: dry mass 0.99 kg, water content 0.010101, wet mass 1 kg
- sodium chloride, powder: 7.66338e-5 kg; lognormal variance with pedigree 0.072, pedigree (4,4,5,5,1)
  Adapted from the dataset 'wood chips, in cogen 6400kWth, wood, emission control', according to actual water, carbon and energy content of the fuel (unconverted solids, mainly lignin)
  EcoSpold01Location=RER
  Uncertainty: adapted from the dataset 'wood chips, in cogen 6400kWth, wood, emission control', according to actual water, carbon and energy content of the fuel (unconverted solids, mainly lignin)
  properties: dry mass 1 kg, wet mass 1 kg
- sulfuric acid: 0.082851 kg; lognormal variance with pedigree 0.0532, pedigree (2,3,5,5,1)
  (same comment as for inorganic nitrogen fertiliser, as N)
  properties: dry mass 1 kg, wet mass 1 kg
- tap water: 0.196249, 0.986493, 0.366192, 0.00330068, 0.128737, 4.94863, 1.42161 kg (7 suppliers, which the file names only by identifier); sum of these 8.05122 kg; lognormal variance with pedigree 0.0532, pedigree (2,3,5,5,1)
  (same comment as for calcium chloride)
  properties: carbon content, fossil 0.00178991, dry mass 0.000337476 kg, water content 2962.17, wet mass 1 kg
  note on carbon content, fossil: Bicarbonate content is 2.93 mol/m3. CO2 content is 0.1 mol/m3 (ecoinvent v2.2 report 8, Tab 93.1).
- transport, tractor and trailer, agricultural: 0.0347005 metric ton*km; lognormal variance with pedigree 0.1732, pedigree (2,3,5,5,1)
  (same comment as for calcium chloride)
- urea: 6.85818e-5, 0.000542269, 0.000463059 kg (3 suppliers, which the file names only by identifier); sum of these 0.00107391 kg; lognormal variance with pedigree 0.072, pedigree (4,4,5,5,1)
  The exchange has been updated from 'urea, as N' into 'urea' and therefore its amount has been scaled (multiplied) from 0.0005 kg by 2.1438 kg of 'urea' per kg of 'urea, as N'. Original comment of the exchange is: Adapted from the dataset 'wood chips, in cogen 6400kWth, wood, emission control', according to actual water, carbon and energy content of the fuel (unconverted solids, mainly lignin)
  EcoSpold01Location=RER
  Uncertainty: adapted from the dataset 'wood chips, in cogen 6400kWth, wood, emission control', according to actual water, carbon and energy content of the fuel (unconverted solids, mainly lignin)
  properties: carbon content, fossil 0.2, dry mass 1 kg, wet mass 1 kg
- waste gypsum: -0.108856 kg; name BP_amount_5; lognormal variance with pedigree 0.0132, pedigree (2,3,1,5,1)
  (same comment as for calcium chloride)
  production volume
    (same comment as for municipal solid waste)
  properties: dry mass 0.806 kg, water content 0.240695, wet mass 1 kg
- waste mineral oil: -6.13089e-5 kg; name BP_amount_2; lognormal variance with pedigree 0.0322, pedigree (4,4,2,5,1)
  (same comment as for heat and power co-generation unit, 6400kW thermal, common components f)
  production volume
    (same comment as for municipal solid waste)
  properties: carbon content, fossil 0.864444, dry mass 0.9 kg, heating value, net 34.7 MJ, water content 0.111111, wet mass 1 kg
  note on carbon content, fossil: Tab A.6, ecoinvent v2.2 report 13_I. C content has been calculated after data in the tables, and then referred to 1 kg DM
- wastewater, average: -5.21881e-8, -1.4658e-5 m3 (2 suppliers, which the file names only by identifier); sum of these -1.47102e-5 m3; lognormal variance with pedigree 0.0322, pedigree (4,4,2,5,1)
  (same comment as for heat and power co-generation unit, 6400kW thermal, common components f)
  production volume
    (same comment as for municipal solid waste)
  properties: carbon content, non-fossil 0.194039, dry mass 0.346837 kg, water content 2882.2, wet mass 1000 kg
  note on carbon content, non-fossil: 0.0673 kg TOC/m3 (Tab A.17, ecoinvent v2.2 report 13_I). TOC was considered as Total Carbon.
- water, decarbonised: 0.00258812, 0.000329574, 0.00408785, 2.31283e-5, 0.000418947, 0.000632006, 0.000246618, 0.000127409, 0.00481566, 0.000767713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 kg (12 suppliers, which the file names only by identifier); sum of these 0.0147102 kg; lognormal variance with pedigree 0.072, pedigree (4,4,5,5,1)
  (same comment as for chlorine, liquid)
  properties: wet mass 1 kg
- wood ash mixture, pure: -0.00988794 kg; name BP_amount_4; lognormal variance with pedigree 0.0322, pedigree (4,4,2,5,1)
  (same comment as for heat and power co-generation unit, 6400kW thermal, building)
  production volume
    (same comment as for municipal solid waste)
  properties: carbon content, non-fossil 0.012, dry mass 1 kg, wet mass 1 kg
- wood chips, wet, measured as dry mass: 3.84693, 0.00871624 kg (2 suppliers, which the file names only by identifier); sum of these 3.85564 kg; lognormal variance with pedigree 0.0532, pedigree (2,3,5,5,1)
  (same comment as for inorganic nitrogen fertiliser, as N)
  properties: carbon content, non-fossil 0.494, dry mass 1 kg, heating value, net 10.84 MJ, water content 0.8, wet mass 1.8 kg
  note on carbon content, non-fossil: C content of dry mass is 0.494 kgC/kg dry wood (ecoinvent v2.2 report 9).
  note on heating value, net: Value based on the dataset 'softwood forestry, mixed species, sustainable forest management'

## Emissions to nature
- Acetaldehyde [air, urban air close to ground]: 1.14022e-6 kg; lognormal variance with pedigree 0.112, pedigree (4,4,5,5,1)
  Adapted from the dataset 'wood chips, in cogen 6400kWth, wood, emission control', according to actual water, carbon and energy content of the fuel (unconverted solids, mainly lignin)
  Uncertainty: adapted from the dataset 'wood chips, in cogen 6400kWth, wood, emission control', according to actual water, carbon and energy content of the fuel (unconverted solids, mainly lignin)
- Ammonia [air, urban air close to ground]: 0.000317759 kg; lognormal variance with pedigree 0.072, pedigree (4,4,5,5,1)
  (same comment as for Acetaldehyde)
- Arsenic ion [air, urban air close to ground]: 1.86921e-8 kg; lognormal variance with pedigree 0.712, pedigree (4,4,5,5,1)
  (same comment as for Acetaldehyde)
- Benzene [air, urban air close to ground]: 1.84208e-5 kg; lognormal variance with pedigree 0.112, pedigree (4,4,5,5,1)
  (same comment as for Acetaldehyde)
- Benzene, ethyl- [air, urban air close to ground]: 6.0729e-7 kg; lognormal variance with pedigree 0.112, pedigree (4,4,5,5,1)
  (same comment as for Acetaldehyde)
- Benzene, hexachloro- [air, urban air close to ground]: 1.45749e-13 kg; lognormal variance with pedigree 0.372, pedigree (4,4,5,5,1)
  (same comment as for Acetaldehyde)
- Benzo(a)pyrene [air, urban air close to ground]: 1.0121e-8 kg; lognormal variance with pedigree 0.372, pedigree (4,4,5,5,1)
  (same comment as for Acetaldehyde)
- Bromine [air, urban air close to ground]: 1.12151e-6 kg; lognormal variance with pedigree 0.712, pedigree (4,4,5,5,1)
  (same comment as for Acetaldehyde)
- Cadmium II [air, urban air close to ground]: 1.30845e-8 kg; lognormal variance with pedigree 0.712, pedigree (4,4,5,5,1)
  (same comment as for Acetaldehyde)
- Calcium [air, urban air close to ground]: 0.000109348 kg; lognormal variance with pedigree 0.712, pedigree (4,4,5,5,1)
  (same comment as for Acetaldehyde)
- Carbon dioxide, non-fossil [air, urban air close to ground]: 5.15338 kg; lognormal variance with pedigree 0.042, pedigree (1,1,5,5,1)
  Calculation, to close carbon balance
  Uncertainty: calculation, to close carbon balance
- Carbon monoxide, non-fossil [air, urban air close to ground]: 0.000141704 kg; lognormal variance with pedigree 0.712, pedigree (4,4,5,5,1)
  (same comment as for Acetaldehyde)
- Chlorine [air, urban air close to ground]: 3.36453e-6 kg; lognormal variance with pedigree 0.112, pedigree (4,4,5,5,1)
  (same comment as for Acetaldehyde)
- Chromium III [air, urban air close to ground]: 7.40239e-8 kg; lognormal variance with pedigree 0.712, pedigree (4,4,5,5,1)
  (same comment as for Acetaldehyde)
- Chromium VI [air, urban air close to ground]: 7.47694e-10 kg; lognormal variance with pedigree 0.712, pedigree (4,4,5,5,1)
  (same comment as for Acetaldehyde)
- Copper ion [air, urban air close to ground]: 4.11216e-7 kg; lognormal variance with pedigree 0.712, pedigree (4,4,5,5,1)
  (same comment as for Acetaldehyde)
- Dinitrogen monoxide [air, urban air close to ground]: 0.000411216 kg; lognormal variance with pedigree 0.112, pedigree (4,4,5,5,1)
  (same comment as for Acetaldehyde)
- Dioxins, measured as 2,3,7,8-tetrachlorodibenzo-p-dioxin [air, urban air close to ground]: 6.27537e-13 kg; lognormal variance with pedigree 0.372, pedigree (4,4,5,5,1)
  (same comment as for Acetaldehyde)
- Fluorine [air, urban air close to ground]: 9.34568e-7 kg; lognormal variance with pedigree 0.112, pedigree (4,4,5,5,1)
  (same comment as for Acetaldehyde)
- Formaldehyde [air, urban air close to ground]: 2.63161e-6 kg; lognormal variance with pedigree 0.112, pedigree (4,4,5,5,1)
  (same comment as for Acetaldehyde)
- Hydrocarbons, aliphatic, alkanes, unspecified [air, urban air close to ground]: 1.84208e-5 kg; lognormal variance with pedigree 0.112, pedigree (4,4,5,5,1)
  (same comment as for Acetaldehyde)
- Hydrocarbons, aliphatic, unsaturated [air, urban air close to ground]: 6.27537e-5 kg; lognormal variance with pedigree 0.112, pedigree (4,4,5,5,1)
  (same comment as for Acetaldehyde)
- Lead II [air, urban air close to ground]: 4.65427e-7 kg; lognormal variance with pedigree 0.712, pedigree (4,4,5,5,1)
  (same comment as for Acetaldehyde)
- Magnesium [air, urban air close to ground]: 6.74777e-6 kg; lognormal variance with pedigree 0.712, pedigree (4,4,5,5,1)
  (same comment as for Acetaldehyde)
- Manganese II [air, urban air close to ground]: 3.19623e-6 kg; lognormal variance with pedigree 0.712, pedigree (4,4,5,5,1)
  (same comment as for Acetaldehyde)
- Mercury II [air, urban air close to ground]: 5.60749e-9 kg; lognormal variance with pedigree 0.712, pedigree (4,4,5,5,1)
  (same comment as for Acetaldehyde)
- Methane, non-fossil [air, urban air close to ground]: 8.78517e-6 kg; lognormal variance with pedigree 0.112, pedigree (4,4,5,5,1)
  (same comment as for Acetaldehyde)
- NMVOC, non-methane volatile organic compounds [air, urban air close to ground]: 1.2348e-5 kg; lognormal variance with pedigree 0.112, pedigree (4,4,5,5,1)
  (same comment as for Acetaldehyde)
- Nickel II [air, urban air close to ground]: 1.12151e-7 kg; lognormal variance with pedigree 0.712, pedigree (4,4,5,5,1)
  (same comment as for Acetaldehyde)
- Nitrogen oxides [air, urban air close to ground]: 0.000822459 kg; lognormal variance with pedigree 0.112, pedigree (4,4,5,5,1)
  (same comment as for Acetaldehyde)
- PAH, polycyclic aromatic hydrocarbons [air, urban air close to ground]: 2.22673e-7 kg; lognormal variance with pedigree 0.372, pedigree (4,4,5,5,1)
  (same comment as for Acetaldehyde)
- Particulate Matter, < 2.5 um [air, urban air close to ground]: 0.00010121 kg; lognormal variance with pedigree 0.372, pedigree (4,4,5,5,1)
  (same comment as for Acetaldehyde)
- Phenol, pentachloro- [air, urban air close to ground]: 1.63974e-10 kg; lognormal variance with pedigree 0.112, pedigree (4,4,5,5,1)
  (same comment as for Acetaldehyde)
- Phosphorus [air, urban air close to ground]: 5.60749e-6 kg; lognormal variance with pedigree 0.112, pedigree (4,4,5,5,1)
  (same comment as for Acetaldehyde)
- Potassium I [air, urban air close to ground]: 0.000437386 kg; lognormal variance with pedigree 0.712, pedigree (4,4,5,5,1)
  (same comment as for Acetaldehyde)
- Sodium [air, urban air close to ground]: 2.42989e-5 kg; lognormal variance with pedigree 0.712, pedigree (4,4,5,5,1)
  (same comment as for Acetaldehyde)
- Sulfur dioxide [air, urban air close to ground]: 4.65427e-5 kg; lognormal variance with pedigree 0.072, pedigree (4,4,5,5,1)
  (same comment as for Acetaldehyde)
- Toluene [air, urban air close to ground]: 6.0729e-6 kg; lognormal variance with pedigree 0.112, pedigree (4,4,5,5,1)
  (same comment as for Acetaldehyde)
- Water [air, unspecified]: 0.00749839 m3; name water_to_air_unspecified; lognormal variance with pedigree 0.0827, pedigree (2,2,5,5,1)
  Calculated value based on literature values and expert opinion. See comments in the parametres' comment field.
  property fraction, origin: fresh water 1; name fraction_origin_fresh_water
  property fraction, origin: salt water 0; name fraction_origin_salt_water
  property fraction, origin: unspecified 0; name fraction_origin_unspecified
- Zinc II [air, urban air close to ground]: 5.60749e-6 kg; lognormal variance with pedigree 0.712, pedigree (4,4,5,5,1)
  (same comment as for Acetaldehyde)
- m-Xylene [air, urban air close to ground]: 2.42914e-6 kg; lognormal variance with pedigree 0.112, pedigree (4,4,5,5,1)
  (same comment as for Acetaldehyde)
- Water [water, unspecified]: 0.000567539 m3; name water_to_water_unspecified; lognormal variance with pedigree 0.0827, pedigree (2,2,5,5,1)
  (same comment as for Water)
  property carbon content, fossil 0; name C_content_fossil
  property carbon content, non-fossil 0; name C_content_non_fossil
  property fraction, origin: fresh water 1; name fraction_origin_fresh_water_Ww
  property fraction, origin: salt water 0; name fraction_origin_salt_water_Ww
  property fraction, origin: unspecified 0; name fraction_origin_unspecified_Ww
  property water in wet mass 1000 kg; name WWM

## Sampling procedure
Data is adapted to Swiss conditions from NREL ethanol process design from yellow poplar, modelling by ENERS (CH)

## Extrapolations
Direct emissions (resulting from the combustion of unconverted solids, incl. lignin) are based on the the combustion of wood chips (with emission control), according to the corresponding dry matter content, carbon content and energy content. This dataset has been copied from an original dataset covering the geography CH. The uncertainty has been adjusted accordingly.

## Review by Niels Jungbluth 2006-08-15
Passed.
none
