# buttermilk, from cow milk to generic market for protein feed

Dataset: EcoSpold 2, unit process
Geography: GLO
Time period: 2014-01-01 to 2022-12-31
Technology level: current
Classification: ISIC rev.4 ecoinvent: 1080:Manufacture of prepared animal feeds
Scenario: Business-as-Usual
System model: Substitution, consequential, long-term
Generated by: Tereza Levova
Database: ecoinvent
isCopyrightProtected: true

## General comment
This activity is a linking activity, i.e. it connects buttermilk with generic protein feed market. Buttermilk is produced as a by-product in butter production. Buttermilk can be used either for direct human consumption or as a feed for animals. This activity supply part of the buttermilk to the generic market for protain feed, where it is traded with other protein - containing products.

## Included activities end
Buttermilk is a by-product from butter production. This linking activity has the buttermilk as an input and protein and energy feed as output.

## Parameters
- fraction, to generic market: 0.5 dimensionless; name fraction_to_generic_market; lognormal variance with pedigree 0.0086, pedigree (4,1,1,1,1)
  It is assumed that 50% of buttermilk is traded on the generic protein feed market, i.e. its buyers do not care what type of protein feed they are buying. Remaining 50% of the annual production volume is assumed to be used for uses, where specific type of protein feed is required and cannot be substituted by another protein feed.

## Reference product
- buttermilk, from cow milk: 1 kg; By-product classification allocatable product; CPC 22241: Butter and other fats and oils derived from milk of cattle; lognormal variance with pedigree 0.0458, pedigree (3,4,5,4,2)
  production volume 1 kg
  property ash content 0.0562448 kg
    Calculated based on literature value (USDA, National Nutrient Database for Standard Reference, "Milk, buttermilk, fluid, whole", accessed 20130121).
  property carbohydrates content 0.403639 kg
    (same comment as for buttermilk, from cow milk)
  property fat (total lipid) content 0.27378 kg
    (same comment as for buttermilk, from cow milk)
  property fibre (total dietary) content 0 kg
    (same comment as for buttermilk, from cow milk)
  property protein content 0.265509
    (same comment as for buttermilk, from cow milk)
  properties: carbon allocation 0.064286 kg, carbon content 0.531729, carbon content, fossil 0, carbon content, non-fossil 0.531729, dry mass 0.1209 kg, price 0 EUR2005, water content 7.2713, water in wet mass 0.8791 kg, wet mass 1 kg

## Inputs from technosphere
- energy feed, gross: 0.84785, 17.6372 MJ (2 suppliers, which the file names only by identifier); sum of these 18.485 MJ; lognormal variance with pedigree 0.0078, pedigree (3,4,3,4,2)
  Literature value (Agroscope, Swiss Feed Database, www.feedbase.ch, accessed 20130127).
  18.485 MJ/kg of DM is the amount of energy feed, gross in "Buttermilk fresh"
  production volume
    Calculated from production volume of reference product using the relative outputs.
  properties: dry mass 1 kg, price 0.0108 EUR2005, wet mass 1 kg
- protein feed, 100% crude: 0.310164 kg; name protein_feed_RP
  Literature value (Agroscope, Swiss Feed Database, www.feedbase.ch, accessed 20130127).
  0.31016 kg/kg of DM is the amount of crude protein in "Buttermilk fresh"
  production volume
    Calculated value.
    4.94E+10 kg is the amount of buttermilk produced in the world as a by-product of the butter production. Per each 1kg od butter produced, 1.01 kg of buttermilk is produced (Nilsson K., 2010, Comparative life cycle assessment of margarine and butter consumed in the UK, Germany and France).
    It is estimated that 50% of the buttermilk then goes to a generic market for protein feed.
  properties: carbon content, non-fossil 0.53, dry mass 1 kg, price 0.424 EUR2005, wet mass 1 kg
