# rye production

Dataset: EcoSpold 2, unit process
Geography: RER
Time period: 2002-01-01 to 2022-12-31
Technology level: current
Classification: ISIC rev.4 ecoinvent: 0111:Growing of cereals (except rice), leguminous crops and oil seeds
Synonyms: Secale cereale L.
Scenario: Business-as-Usual
System model: Substitution, consequential, long-term
Share of production covered: 100 %
Generated by: Jürgen Sutter
Published in: Jungbluth N. 2007
Database: ecoinvent
isCopyrightProtected: true

## General comment
This dataset represents the cultivation of rye on an area of 1 ha producing the co-products rye grain and straw. The yield of rye grain is 3172 kg/ha at a moisture content at storage of 15%, the yield of straw is 2163 kg/ha at a moisture content of 15%.

[This dataset was already contained in the ecoinvent database version 2. It was not individually updated during the transfer to ecoinvent version 3. Life Cycle Impact Assessment results may still have changed, as they are affected by changes in the supply chain, i.e. in other datasets. This dataset was generated following the ecoinvent quality guidelines for version 2. It may have been subject to central changes described in the ecoinvent version 3 change report (http://www.ecoinvent.org/database/ecoinvent-version-3/reports-of-changes/), and the results of the central updates were reviewed extensively. The changes added e.g. consistent water flows and other information throughout the database. The documentation of this dataset can be found in the ecoinvent reports of version 2, which are still available via the ecoinvent website. The change report linked above covers all central changes that were made during the conversion process.]

## Included activities start
This activity starts after the harvest of the previous crop. The inputs of seeds, mineral fertilisers and pesticides are considered. It is assumed that no farm manure is applied.

## Included activities end
The dataset includes all machine operations and corresponding machine infrastructure and sheds. Machine operations are: soil cultivation, sowing, fertilisation, weed control, pest and pathogen control, combine-harvest, transport from field to regional processing centre (15 km) and drying of grains. Further, direct field emissions are included. This activity ends after drying of grains at the regional processing centre.

## Geography
The inventory is modelled for Europe.

## Technology
Conventional rye cultivation

## Time period
Time of publications.

## Parameters
- fraction, irrigation water to surface water: 0.2 dimensionless; name fraction_IW_to_surface_water; lognormal variance with pedigree 0.0886, pedigree (4,3,1,1,4)
  Literature value (Döll, 2011) cross referenced with expert opinion.
- fraction, irrigation water, to air: 0.587 dimensionless; name fraction_IW_to_air; lognormal variance with pedigree 0.0409, pedigree (2,2,2,1,1)
  Estimated based on literature value (Siebert, 2010) (Vionnet, S., Quantis Water Database - Technical Report, 2012). The specific ratio of irrigation water consumed/irrigation water withdrawn for Europe is not available, therefore data representative for the whole world (58.7%) are used.
- fraction, irrigation water, to ground water: 0.8 dimensionless; name fraction_IW_to_ground_water; lognormal variance with pedigree 0.0886, pedigree (4,3,1,1,4)
  Literature value (Döll, 2011) cross referenced with expert opinion.

## Reference product
- rye grain: 1 kg; name REF_PRODUCT; By-product classification allocatable product; CPC 01162: Rye, other
  EcoSpold01Location=RER
  Average annual yield in the European Union (years 2001-2005; FAOSTAT 2006). Retrieved from http://faostat.fao.org/faostat/ on May 16, 2006.
  production volume 1.36134e10 kg
    Total production of rye in Europe is around 7.6 millions tons
    Europe production 2005 (FAOSTAT)
  property carbon content, non-fossil 0.465305; name REF_PRODUCT_C_content_non_fossil
    biogene carbon content on a dry matter basis
    Composition data obtained from Rye, in (http://www.nal.usda.gov/fnic/foodcomp/search/). First, composition data were refered to 1 kg dry mass. Then, C-contents were calculated considering a C-content/dry mass of 46% in carbohydrates (including fibres), 53% in proteins and 75% in fats. All data from "Evolutionary and Biochemical Aspects", A.D. Kay and T. Vrede (in Global Ecology, 2010, Elsevier B.V., S.E. Jørgensen Ed.).
  property energy content 15.1895 MJ; name REF_PRODUCT_energy_content
    See chapter 'Product Properties' in "01_crop production - yields & inputs CH & Europe_v1.0.pdf", section "AGRICULTURAL PRODUCTION IN SWITZERLAND" - pdf-document on the dedicated talk page of ecoinvent (www.ecoinvent.org/documentation)
  property price 0.109 EUR2005
    Temporary price data. Calculated as 90% of purchasers price based on: 2004 prices for World import/export data (tonnes and US$) from FaoStat statistics (http://faostat.fao.org/site/535/default.aspx#ancor, TRADE)- [Accessed 24 May 2010].
  properties: EcoSpold01Allocation_undefined_1 93.3351, EcoSpold01Allocation_undefined_2 93.3351, EcoSpold01Allocation_undefined_3 93.3351, EcoSpold01Allocation_undefined_4 93.3351, carbon allocation 0.39551 kg, carbon content 0.465305, carbon content, fossil 0, dry mass 0.85 kg, water content 0.176471, water in wet mass 0.15 kg, wet mass 1 kg

## Inputs from technosphere
- [sulfonyl]urea-compound: 6.27049e-6 kg; source Rossberg D. 2002; lognormal variance with pedigree 0.040625, pedigree (1,3,5,2,1)
  Amount of active ingredient from Rossberg (2002). Substances that are not availabe in the ecoinvent database are approximated by inventories of superordinate chemical classes. The inventories were assigned according to Sutter (2010, Tab. 2.25). If no inventory for the active ingredient or the corresponding chemical class was available, the pesticide was approximated with the product “pesticide, unspecified”. --- Sources: Sutter J. (2010) Life Cycle Inventories of Pesticides. Swiss Centre for Life Cycle Inventories, St. Gallen, Switzerland.
  EcoSpold01Location=RER
  Uncertainty: Rossberg 2003
  properties: carbon content, fossil 0.540853, dry mass 1 kg, wet mass 1 kg
  note on carbon content, fossil: Approximated as an unweighted average of the C-content of the [sulfonyl]urea-compounds (Tab 2.25 Sutter, 2010) chlorotoluron, Diuron, Linuron and Isoproturon.
- [thio]carbamate-compound: 1.12115e-6 kg; source Rossberg D. 2002; lognormal variance with pedigree 0.040625, pedigree (1,3,5,2,1)
  EcoSpold01Location=RER
  Amount of active ingredient from Rossberg (2002). Substances that are not availabe in the ecoinvent database are approximated by inventories of superordinate chemical classes. The inventories were assigned according to Sutter (2010, Tab. 2.25). If no inventory for the active ingredient or the corresponding chemical class was available, the pesticide was approximated with the product “pesticide, unspecified”. --- Sources: Sutter J. (2010) Life Cycle Inventories of Pesticides. Swiss Centre for Life Cycle Inventories, St. Gallen, Switzerland.
  Uncertainty: Rossberg 2003
  properties: carbon content, fossil 0.626349, dry mass 1 kg, wet mass 1 kg
  note on carbon content, fossil: Approximated as an unweighted average of the C-content of the [thio]carbamate-compounds (Tab 2.25 Sutter, 2010) carbofuran,orbencarb, prosulfocarb
- ammonium nitrate: 0.00977091 kg; source KTBL 2004; lognormal variance with pedigree 0.040625, pedigree (1,3,5,2,1)
  The exchange has been updated from 'ammonium nitrate, as N' into 'ammonium nitrate' and therefore its amount has been scaled (multiplied) from 10.847 kg by 2.8573 kg of 'ammonium nitrate' per kg of 'ammonium nitrate, as N'. Original comment of the exchange is: Amount of nutrient interpolated from nutrient requirements of rye depending on the yield given in KTBL (2004) for Germany,
  EcoSpold01Location=RER
  Uncertainty: KTBL 2004, Jungbluth
  properties: dry mass 1 kg, wet mass 1 kg
- application of plant protection product, by field sprayer: 0.000528531 ha; source KTBL 2004; lognormal variance with pedigree 0.040625, pedigree (1,3,5,2,1)
  Weighted average based on diesel consumption of rye cultivation in Germany (KTBL 2004; weight: 45.7%) and of wheat cultivation in Poland (Jungbluth 2006; weight: 54.3%). --- Sources: Jungbluth, Niels (2006) Life cycle inventory of wheat straw production in Europe. Personal communication.
  EcoSpold01Location=CH
  Uncertainty: KTBL 2004, Jungbluth 2006
- bale loading: 0.00989912 unit; source Nemecek, T. 2004; lognormal variance with pedigree 0.04, pedigree (1,1,5,1,1)
  EcoSpold01Location=CH
  loading straw bales
  Uncertainty: Nemecek 2004
- baling: 0.00227617 unit; source Nemecek, T. 2004; lognormal variance with pedigree 0.04, pedigree (1,1,5,1,1)
  baling of straw
  EcoSpold01Location=CH
  Uncertainty: Nemecek 2004
- benzimidazole-compound: 1.87185e-6 kg; source Rossberg D. 2002; lognormal variance with pedigree 0.040625, pedigree (1,3,5,2,1)
  (same comment as for [thio]carbamate-compound)
  properties: carbon content, fossil 0.529668, dry mass 1 kg, wet mass 1 kg
  note on carbon content, fossil: C content estimated as an average of that of the pesticides Carbendazim, prochloraz and ethofumesate (Sutter 2010)
- benzo[thia]diazole-compound: 6.10939e-6 kg; source Rossberg D. 2002; lognormal variance with pedigree 0.040625, pedigree (1,3,5,2,1)
  (same comment as for [sulfonyl]urea-compound)
  properties: carbon content, fossil 0.499869, dry mass 1 kg, wet mass 1 kg
  note on carbon content, fossil: C content estimated after the herbicide Bentazon (C10H12N2O3S) (Tab 1.5, Sutter 2010), classified in ecoinvent v2.2 report 15a, Tab 10.3 as a benzo[thia]diazole compound
- combine harvesting: 0.000121504 ha; source KTBL 2004; lognormal variance with pedigree 0.04, pedigree (1,1,5,1,1)
  (same comment as for application of plant protection product, by field sprayer)
- cyclic N-compound: 5.82535e-5 kg; source Rossberg D. 2002; lognormal variance with pedigree 0.040625, pedigree (1,3,5,2,1)
  (same comment as for [sulfonyl]urea-compound)
  properties: carbon content, fossil 0.641962, dry mass 1 kg, wet mass 1 kg
  note on carbon content, fossil: Calculated as an unweigthed average of the C content of the cyclic N-compounds where information was avaliable in Sutter, 2010, following the classification in Tab 2.25 in Sutter 2010: Difenoconazole (C19H17Cl2N3O3), Fenpropidin (C19H31N), Fenpropimorph (C20H33NO), Flusilazole (C16H15F2N3Si), Metconazole (C17H22ClN3O), Penconazole (C13H15Cl2N3), Propiconazole (C15H17Cl2N3O2), Tebuconazole (C16H22ClN3O)
- dinitroaniline-compound: 1.88484e-5 kg; source Rossberg D. 2002; lognormal variance with pedigree 0.040625, pedigree (1,3,5,2,1)
  (same comment as for [thio]carbamate-compound)
  properties: carbon content, fossil 0.55516, dry mass 1 kg, wet mass 1 kg
  note on carbon content, fossil: C content of dinitroaniline-compound was calculated after the C content of the herbicide pendimethalin, classified as dinitroaniline-compound in Tab 2.25 of Sutter 2010
- diphenylether-compound: 9.45681e-6 kg; source Rossberg D. 2002; lognormal variance with pedigree 0.040625, pedigree (1,3,5,2,1)
  (same comment as for [sulfonyl]urea-compound)
  properties: carbon content, fossil 0.560061, dry mass 1 kg, wet mass 1 kg
  note on carbon content, fossil: C content of diphenylether-compounds was calculated after the C content of thepesticides aclonifen and diflufenican classified as diphenylether-compound in Tab 2.25 of Sutter 2010
- drying of bread grain, seed and legumes: 0.0119048 l; source Nemecek, T. 2004; lognormal variance with pedigree 0.04, pedigree (1,1,5,1,1)
  EcoSpold01Location=CH
  Uncertainty: Nemecek 2004
- fertilising, by broadcaster: 0.000219209 ha; lognormal variance with pedigree 0.040625, pedigree (1,3,5,2,1)
  EcoSpold01Location=CH
  Weighted average based on diesel consumption of rye cultivation in Germany (KTBL 2004; weight: 45.7%) and of wheat cultivation in Poland (Jungbluth 2006; weight: 54.3%). --- Sources: Jungbluth, Niels (2006) Life cycle inventory of wheat straw production in Europe. Personal communication.
  Uncertainty: KTBL 2004, Jungbluth 2006
- glyphosate: 6.24149e-6 kg; source Rossberg D. 2002; lognormal variance with pedigree 0.040625, pedigree (1,3,5,2,1)
  (same comment as for [thio]carbamate-compound)
  properties: carbon content, fossil 0.214286, dry mass 1 kg, wet mass 1 kg
- inorganic nitrogen fertiliser, as N: 0.0201497 kg; source KTBL 2004; lognormal variance with pedigree 0.040625, pedigree (1,3,5,2,1)
  Amount of nutrient interpolated from nutrient requirements of rye depending on the yield given in KTBL (2004) for Germany,
  EcoSpold01Location=RER
  Uncertainty: KTBL 2004, Jungbluth
  properties: dry mass 1 kg, wet mass 1 kg
- inorganic phosphorus fertiliser, as P2O5: 0.0172287 kg; source KTBL 2004; lognormal variance with pedigree 0.040625, pedigree (1,3,5,2,1)
  (same comment as for inorganic nitrogen fertiliser, as N)
  properties: dry mass 1 kg, wet mass 1 kg
- inorganic potassium fertiliser, as K2O: 0.0177771 kg; source KTBL 2004; lognormal variance with pedigree 0.040625, pedigree (1,3,5,2,1)
  Amount of nutrient interpolated from nutrient requirements of rye depending on the yield given in KTBL (2004) for Germany,
  Uncertainty: KTBL 2004, Jungbluth
  properties: dry mass 1 kg, wet mass 1 kg
- irrigation: 0.0254742, 0.000638855, 0.00275623, 0.156506 m3 (4 suppliers, which the file names only by identifier); sum of these 0.185375 m3; source Siebert, S. 2010; lognormal variance with pedigree 0.0427, pedigree (2,2,5,1,1)
  Calculated based on literature values (Döll, 2010) and partially modelled at ETH (Pfister, S.).
  properties: dry mass 0.11 kg, water content 9089.91, wet mass 1000 kg
- lime: 0.315259 kg; source KTBL 2004; lognormal variance with pedigree 0.040625, pedigree (1,3,5,2,1)
  Amount of nutrient interpolated from nutrient requirements of rye depending on the yield given in KTBL (2004) for Germany,
  EcoSpold01Location=CH
  Uncertainty: KTBL 2004, Jungbluth
  properties: carbon content, fossil 0.120005, dry mass 1 kg, wet mass 1 kg
- nitrile-compound: 1.15851e-5 kg; source Rossberg D. 2002; lognormal variance with pedigree 0.040625, pedigree (1,3,5,2,1)
  (same comment as for [thio]carbamate-compound)
  properties: carbon content, fossil 0.344995, dry mass 1 kg, wet mass 1 kg
  note on carbon content, fossil: An unweighted average of the C content in chlorothalonil, dichlobenil, bromoxynil, ioxynil, substances classified as nitrile-compounds in Tab 2.25, Sutter 2010
- organophosphorus-compound, unspecified: 1.67197e-6 kg; source Rossberg D. 2002; lognormal variance with pedigree 0.040625, pedigree (1,3,5,2,1)
  (same comment as for [sulfonyl]urea-compound)
  properties: carbon content, fossil 0.260898, dry mass 1 kg, wet mass 1 kg
  note on carbon content, fossil: C content was calculated as an unweighted average of glyphosate, parathion, and fosetyl-Al. Those substances are classified as organo-phosphorous compounds in Tab 2.25, Sutter 2010
- packaging, for fertilisers: 0.785905 kg; lognormal variance with pedigree 0.0912, pedigree (4,3,5,5,4)
  Total amount of active substance/s of fertilisers needed for the production of 'rye grain' is calculated to be circa 1.25E+03 kg. Fertiliser/s used in this dataset is/are: 'ammonium nitrate, as N', 'lime', 'nitrogen fertiliser, as N', 'phosphate fertiliser, as P2O5', 'potassium chloride, as K2O', 'potassium fertiliser, as K2O', 'urea, as N'. The total amount of active substance/s is doubled in order to account for the packaging of the dilluted product of fertiliser/s that is/are applied. Therefore, 2.49E+03 kg of packaging for fertilisers is justified with this exchange.
  properties: carbon content, fossil 0.825301, dry mass 1 kg, heating value, net 25.01 MJ, price 0.0642 EUR2005, wet mass 1 kg
  note on carbon content, fossil: Considering a chemical formula (C2H4)n for polyethylene, carbon content-fossil is calculated to be 0.856286 kg of Carbon per kg of dry mass.
- packaging, for pesticides: 0.00111134 kg; lognormal variance with pedigree 0.0912, pedigree (4,3,5,5,4)
  Total amount of active substance/s of pesticides needed for the production of rye grain is calculated to be circa 1.76E+00 kg. Pesticide/s used in this dataset is/are: '[sulfonyl]urea-compound', '[thio]carbamate-compound', 'benzimidazole-compound', 'benzo[thia]diazole-compound', 'cyclic N-compound', 'dinitroaniline-compound', 'diphenylether-compound', 'glyphosate', 'nitrile-compound', 'organophosphorus-compound, unspecified', 'pesticide, unspecified', 'phenoxy-compound', 'pyrethroid-compound'. The total amount of active substance/s is doubled in order to account for the packaging of the dilluted product of pesticide/s that is/are applied. Therefore, 3.53E+00 kg of packaging for pesticides is justified with this exchange.
  properties: carbon content, fossil 0.85714, dry mass 1 kg, heating value, net 25.97 MJ, price 0.0642 EUR2005, wet mass 1 kg
- pesticide, unspecified: 0.000414439 kg; source Rossberg D. 2002; lognormal variance with pedigree 0.040625, pedigree (1,3,5,2,1)
  (same comment as for [thio]carbamate-compound)
  properties: carbon content, fossil 0.486978, dry mass 1 kg, wet mass 1 kg
  note on carbon content, fossil: Mean of C content in all pesticides whose formula has been documented in Sutter 2010
- phenoxy-compound: 9.61255e-6 kg; source Rossberg D. 2002; lognormal variance with pedigree 0.040625, pedigree (1,3,5,2,1)
  (same comment as for [thio]carbamate-compound)
  properties: carbon content, fossil 0.532559, dry mass 1 kg, wet mass 1 kg
  note on carbon content, fossil: An unweighted average of the C content in mCPA, mCPB, mecoprop, fluazifop-P-butyl, and 2,4-D. Those substances are classified as phenoxy-compounds in Tab 2.25, Sutter 2010
- potassium chloride: 0.0259746 kg; source KTBL 2004; lognormal variance with pedigree 0.040625, pedigree (1,3,5,2,1)
  EcoSpold01Location=RER
  The exchange has been updated from 'potassium chloride, as K2O' into 'potassium chloride' and therefore its amount has been scaled (multiplied) from 52.051 kg by 1.5829 kg of 'potassium chloride' per kg of 'potassium chloride, as K2O'. Original comment of the exchange is: Amount of nutrient interpolated from nutrient requirements of rye depending on the yield given in KTBL (2004) for Germany,
  Uncertainty: KTBL 2004, Jungbluth
  properties: dry mass 1 kg, wet mass 1 kg
- pyrethroid-compound: 1.01869e-5 kg; source Rossberg D. 2002; lognormal variance with pedigree 0.040625, pedigree (1,3,5,2,1)
  EcoSpold01Location=CH
  Amount of active ingredient from Rossberg (2002). Substances that are not availabe in the ecoinvent database are approximated by inventories of superordinate chemical classes. The inventories were assigned according to Sutter (2010, Tab. 2.25). If no inventory for the active ingredient or the corresponding chemical class was available, the pesticide was approximated with the product “pesticide, unspecified”. --- Sources: Sutter J. (2010) Life Cycle Inventories of Pesticides. Swiss Centre for Life Cycle Inventories, St. Gallen, Switzerland.
  Uncertainty: Rossberg 2003
  properties: carbon content, fossil 0.623, dry mass 1 kg, wet mass 1 kg
  note on carbon content, fossil: C content of pyrethroid-compounds was calculated as an unweigthed average of C content of the substances: cypermethrin, alpha-cypermethrin,beta-cyfluthrin, lambdacyhalothrin. Those substances are classified as pyrethroid-compounds in Tab 2.25, Sutter 2010
- rye seed, for sowing: 0.0441362 kg; name SEED; source Nemecek, T. 2004; lognormal variance with pedigree 0.040625, pedigree (1,3,5,2,1)
  Uncertainty: Nemecek 2004
  property carbon content, non-fossil 0.448334; name SEED_C_content_non_fossil
  property energy content 15.1895 MJ; name SEED_energy_content
  property water content 0.176471; name rye_seed_sowing_water_content
  property water in wet mass 0.15 kg; name rye_seed_sowing_WWM
  properties: dry mass 0.85 kg, wet mass 1 kg
  note on carbon content, non-fossil: biogene carbon content on a dry matter basis; Composition data obtained from Rye, in (http://www.nal.usda.gov/fnic/foodcomp/search/). First, composition data were refered to 1 kg dry mass. Then, C-contents were calculated considering a C-content/dry mass of 44% in carbohydrates (including fibres), 53% in proteins and 75% in fats. All data from ecoinvent report, n 15a, pg 40, except C-content in protein, that comes from Determination of protein concentration by total organic carbon analysis, Rouwenhorst et al., 1991, J Biochem and Biophys Methods, 22:119-128.
  note on energy content: See chapter 'Product Properties' in "01_crop production - yields & inputs CH & Europe_v1.0.pdf", section "AGRICULTURAL PRODUCTION IN SWITZERLAND" - pdf-document on the dedicated talk page of ecoinvent (www.ecoinvent.org/documentation)
- sowing: 0.000189083 ha; source KTBL 2004; lognormal variance with pedigree 0.040625, pedigree (1,3,5,2,1)
  (same comment as for fertilising, by broadcaster)
- straw: -0.68181 kg; name BY_PRODUCT; source Nemecek, T. 2004
  EcoSpold01Location=RER
  Harvested mass of straw: 50% (Nemecek et al. 2004). Total mass of straw based on ratio grain/straw from Nemecek et al. (2004)
  production volume
    Total production of rye in Europe is around 7.6 millions tons
    calculated from the proportion of 2163 kg straw to 3172 kg grain (per ha)
  property carbon content, non-fossil 0.437377; name BY_PRODUCT_C_content_non_fossil
  property energy content 17.459 MJ; name BY_PRODUCT_energy_content
  properties: EcoSpold01Allocation_undefined_1 6.66492, EcoSpold01Allocation_undefined_2 6.66492, EcoSpold01Allocation_undefined_3 6.66492, EcoSpold01Allocation_undefined_4 6.66492, dry mass 0.85 kg, heating value, net 14.25 MJ, price 0.012 EUR2005, water content 0.176471, wet mass 1 kg
  note on carbon content, non-fossil: biogene carbon content on a dry matter basis Composition data obtained as the average of those of Rye straw (http://beefmagazine.com/images/2009%20feed%20table.pdf), and Barley straw and Wheat straw (http://www.uwex.edu/ces/crops/uwforage/StrawFOF.pdf). First, composition data were refered to 1 kg dry mass. Then, C-contents were calculated considering a C-content/dry mass of 46% in carbohydrates (including fibres), 53% in proteins and 75% in fats. All data from "Evolutionary and Biochemical Aspects", A.D. Kay and T. Vrede (in Global Ecology, 2010, Elsevier B.V., S.E. Jørgensen Ed.).
  note on heating value, net: Literature value, Source: Phyllis2, database for (treated) biomass, algae, feedstocks for biogas production and biochar, https://phyllis.nl/Biomass/View/1271, ECN.TNO
- tillage, cultivating, chiselling: 0.000217096 ha; source KTBL 2004; lognormal variance with pedigree 0.04, pedigree (1,1,5,1,1)
  (same comment as for fertilising, by broadcaster)
- tillage, harrowing, by spring tine harrow: 0.000544073 ha; source KTBL 2004; lognormal variance with pedigree 0.040625, pedigree (1,3,5,2,1)
  (same comment as for fertilising, by broadcaster)
- tillage, ploughing: 0.00018902 ha; source KTBL 2004; lognormal variance with pedigree 0.040625, pedigree (1,3,5,2,1)
  (same comment as for fertilising, by broadcaster)
- transport, tractor and trailer, agricultural: 0.0156788 metric ton*km; lognormal variance with pedigree 0.268, pedigree (4,5,5,5,5)
  EcoSpold01Location=CH
  Transport of harvested grains to the regional processing centre; distance 15 km (according to Nemecek et al. 2004).
  Uncertainty: Standard Distances
- urea: 0.00580847 kg; source KTBL 2004; lognormal variance with pedigree 0.040625, pedigree (1,3,5,2,1)
  EcoSpold01Location=RER
  The exchange has been updated from 'urea, as N' into 'urea' and therefore its amount has been scaled (multiplied) from 8.5943 kg by 2.1438 kg of 'urea' per kg of 'urea, as N'. Original comment of the exchange is: Amount of nutrient interpolated from nutrient requirements of rye depending on the yield given in KTBL (2004) for Germany,
  Uncertainty: KTBL 2004, Jungbluth
  properties: carbon content, fossil 0.2, dry mass 1 kg, wet mass 1 kg

## Inputs from nature
- Carbon dioxide, in air [natural resource, in air]: 2.31794 kg; = 44/12 * (REF_PRODUCT_C_content_non_fossil * REF_PRODUCT * REF_PRODUCT_DM + BY_PRODUCT_C_content_non_fossil * BY_PRODUCT * BY_PRODUCT_DM - SEED_C_content_non_fossil * SEED * SEED_DM); lognormal variance with pedigree 0.0586, pedigree (4,3,5,1,1)
  Modelled,see chapter 'CO2 binding' in "01_crop production_direct field emissions and natural resources_v1.0.pdf" - pdf-document on the dedicated talk page of ecoinvent (www.ecoinvent.org/documentation)
  Uncertainty: calculated from the carbon balance
- Energy, gross calorific value, in biomass [natural resource, biotic]: 22.8764 MJ; lognormal variance with pedigree 0.0517684, pedigree (4,3,5,1,1)
  Calculated from energy balance.
- Occupation, annual crop, non-irrigated, intensive [natural resource, land]: 2.62714 m2*year; lognormal variance with pedigree 0.08, pedigree (1,1,5,1,1)
  Modelled, based on chapter 'Land use' in "01_crop production_direct field emissions and natural resources_v1.0.pdf" - pfd-document on the dedicated talk page of econinvent (www.ecoinvent.og/documentation)
  Uncertainty: FAOSTAT 2006
- Transformation, from annual crop, non-irrigated, intensive [natural resource, land]: 2.23834 m2; lognormal variance with pedigree 0.16, pedigree (1,1,5,1,1)
  (same comment as for Occupation, annual crop, non-irrigated, intensive)
- Transformation, from pasture, man made, intensive [natural resource, land]: 0.91425 m2; lognormal variance with pedigree 0.16, pedigree (1,1,5,1,1)
  (same comment as for Occupation, annual crop, non-irrigated, intensive)
- Transformation, to annual crop, non-irrigated, intensive [natural resource, land]: 3.15259 m2; lognormal variance with pedigree 0.16, pedigree (1,1,5,1,1)
  (same comment as for Occupation, annual crop, non-irrigated, intensive)

## Emissions to nature
- Ammonia [air, non-urban air or from high stacks]: 0.00115558 kg; lognormal variance with pedigree 0.0686, pedigree (4,3,5,1,1)
  Modelled, based on the 'AGRAMMON model' in "01_crop production_direct field emissions and natural resources_v1.0.pdf" - pfd-document on the dedicated talk page of econinvent (www.ecoinvent.og/documentation)
  Uncertainty: Calculated with standard method
- Dinitrogen monoxide [air, non-urban air or from high stacks]: 0.000659927 kg; name N2O; lognormal variance with pedigree 0.0986, pedigree (4,3,5,1,1)
  Modelled, based on chapter 'Emissions of N2O to the air' in "01_crop production_direct field emissions and natural resources_v1.0.pdf" - pfd-document on the dedicated talk page of econinvent (www.ecoinvent.og/documentation)
  Uncertainty: Calculated with standard method
- Nitrogen oxides [air, non-urban air or from high stacks]: 0.000138585 kg; = 0.21 * N2O; lognormal variance with pedigree 0.0986, pedigree (4,3,5,1,1)
  Modelled, see chapter 'Emissions of NOx to the air' in "01_crop production_direct field emissions and natural resources_v1.0.pdf" - pdf-document on the dedicated talk page of ecoinvent (www.ecoinvent.org/documentation)
  Uncertainty: Calculated with standard method
- Water [air, unspecified]: 0.108815 m3; name water_to_air_unspecified; = (water_irrigation_input*fraction_IW_to_air); lognormal variance with pedigree 0.0807, pedigree (2,2,5,1,1)
  Calculated value based on literature values and expert opinion. See comments in the parametres' comment field.
  property fraction, origin: fresh water 1; name fraction_origin_fresh_water
  property fraction, origin: salt water 0; name fraction_origin_salt_water
  property fraction, origin: unspecified 0; name fraction_origin_unspecified
- Amidosulfuron [soil, agricultural]: 2.1448e-7 kg; lognormal variance with pedigree 0.0686, pedigree (4,3,5,1,1)
  Modelled, based on chapter 'Emissions of pesticides to agricultural soil' in "01_crop production_direct field emissions and natural resources_v1.0.pdf" - pfd-document on the dedicated talk page of econinvent (www.ecoinvent.og/documentation)
  Uncertainty: Calculated from the pesticide application
- Azoxystrobin [soil, agricultural]: 7.0681e-6 kg; lognormal variance with pedigree 0.0686, pedigree (4,3,5,1,1)
  (same comment as for Amidosulfuron)
- Bentazone [soil, agricultural]: 6.10939e-6 kg; lognormal variance with pedigree 0.0686, pedigree (4,3,5,1,1)
  (same comment as for Amidosulfuron)
- Cadmium II [soil, agricultural]: 9.61475e-7 kg; source Nemecek, T. 2004; lognormal variance with pedigree 0.0986, pedigree (4,3,5,1,1)
  Calculated as the difference between heavy metal input through fertilisers and output through the harvested product. Heavy metal contents of rye grains, straw and mineral fertilizers according to Nemecek et al. (2004). Negative values represent a net export of heavy metals.
  Uncertainty: Calculated from the fertilizer input
- Carbendazim [soil, agricultural]: 1.87185e-6 kg; lognormal variance with pedigree 0.0686, pedigree (4,3,5,1,1)
  (same comment as for Amidosulfuron)
- Chlormequat [soil, agricultural]: 0.000122945 kg; lognormal variance with pedigree 0.0686, pedigree (4,3,5,1,1)
  (same comment as for Amidosulfuron)
- Chlortoluron [soil, agricultural]: 5.91456e-6 kg; lognormal variance with pedigree 0.0686, pedigree (4,3,5,1,1)
  (same comment as for Amidosulfuron)
- Chromium III [soil, agricultural]: 5.99779e-6 kg; source Nemecek, T. 2004; lognormal variance with pedigree 0.0986, pedigree (4,3,5,1,1)
  (same comment as for Cadmium II)
- Cinidon-ethyl [soil, agricultural]: 2.59978e-7 kg; lognormal variance with pedigree 0.0686, pedigree (4,3,5,1,1)
  (same comment as for Amidosulfuron)
- Copper ion [soil, agricultural]: -3.02339e-6 kg; source Nemecek, T. 2004
  Calculated as the difference between heavy metal input through fertilisers and output through the harvested product. Heavy metal contents of rye grains, straw and mineral fertilizers according to Nemecek et al. (2004). Negative values represent a net export of heavy metals.
- Cypermethrin [soil, agricultural]: 9.5703e-6 kg; lognormal variance with pedigree 0.0686, pedigree (4,3,5,1,1)
  (same comment as for Amidosulfuron)
- Cyproconazole [soil, agricultural]: 3.14571e-6 kg; lognormal variance with pedigree 0.0686, pedigree (4,3,5,1,1)
  (same comment as for Amidosulfuron)
- Cyprodinil [soil, agricultural]: 3.7046e-6 kg; lognormal variance with pedigree 0.0686, pedigree (4,3,5,1,1)
  (same comment as for Amidosulfuron)
- Deltamethrin [soil, agricultural]: 3.16835e-8 kg; lognormal variance with pedigree 0.0686, pedigree (4,3,5,1,1)
  (same comment as for Amidosulfuron)
- Dichlorprop-P [soil, agricultural]: 9.74905e-6 kg; lognormal variance with pedigree 0.0686, pedigree (4,3,5,1,1)
  (same comment as for Amidosulfuron)
- Diflufenican [soil, agricultural]: 9.45681e-6 kg; lognormal variance with pedigree 0.0686, pedigree (4,3,5,1,1)
  (same comment as for Amidosulfuron)
- Dimethoate [soil, agricultural]: 2.23061e-5 kg; lognormal variance with pedigree 0.0686, pedigree (4,3,5,1,1)
  (same comment as for Amidosulfuron)
- Dithianon [soil, agricultural]: 2.1448e-6 kg; lognormal variance with pedigree 0.0686, pedigree (4,3,5,1,1)
  (same comment as for Amidosulfuron)
- Epoxiconazole [soil, agricultural]: 2.80287e-6 kg; lognormal variance with pedigree 0.0686, pedigree (4,3,5,1,1)
  (same comment as for Amidosulfuron)
- Esfenvalerate [soil, agricultural]: 4.06211e-8 kg; lognormal variance with pedigree 0.0686, pedigree (4,3,5,1,1)
  (same comment as for Amidosulfuron)
- Ethephon [soil, agricultural]: 0.000102156 kg; lognormal variance with pedigree 0.0686, pedigree (4,3,5,1,1)
  (same comment as for Amidosulfuron)
- Fenbuconazole [soil, agricultural]: 5.60561e-7 kg; lognormal variance with pedigree 0.0686, pedigree (4,3,5,1,1)
  (same comment as for Amidosulfuron)
- Fenpropidin [soil, agricultural]: 8.92055e-6 kg; lognormal variance with pedigree 0.0686, pedigree (4,3,5,1,1)
  (same comment as for Amidosulfuron)
- Fenpropimorph [soil, agricultural]: 1.77922e-5 kg; lognormal variance with pedigree 0.0686, pedigree (4,3,5,1,1)
  (same comment as for Amidosulfuron)
- Fluquinconazole [soil, agricultural]: 4.87453e-7 kg; lognormal variance with pedigree 0.0686, pedigree (4,3,5,1,1)
  (same comment as for Amidosulfuron)
- Fluroxypyr [soil, agricultural]: 6.43443e-7 kg; lognormal variance with pedigree 0.0686, pedigree (4,3,5,1,1)
  (same comment as for Amidosulfuron)
- Flurtamone [soil, agricultural]: 5.68695e-6 kg; lognormal variance with pedigree 0.0686, pedigree (4,3,5,1,1)
  (same comment as for Amidosulfuron)
- Flusilazole [soil, agricultural]: 1.95763e-6 kg; lognormal variance with pedigree 0.0686, pedigree (4,3,5,1,1)
  (same comment as for Amidosulfuron)
- Glyphosate [soil, agricultural]: 6.24149e-6 kg; lognormal variance with pedigree 0.0686, pedigree (4,3,5,1,1)
  (same comment as for Amidosulfuron)
- Iodosulfuron [soil, agricultural]: 3.24968e-8 kg; lognormal variance with pedigree 0.0686, pedigree (4,3,5,1,1)
  (same comment as for Amidosulfuron)
- Ioxynil [soil, agricultural]: 1.15851e-5 kg; lognormal variance with pedigree 0.0686, pedigree (4,3,5,1,1)
  (same comment as for Amidosulfuron)
- Isoproturon [soil, agricultural]: 0.000108216 kg; lognormal variance with pedigree 0.0686, pedigree (4,3,5,1,1)
  (same comment as for Amidosulfuron)
- Kresoxim-methyl [soil, agricultural]: 3.33102e-6 kg; lognormal variance with pedigree 0.0686, pedigree (4,3,5,1,1)
  (same comment as for Amidosulfuron)
- Lambda-cyhalothrin [soil, agricultural]: 6.16646e-7 kg; lognormal variance with pedigree 0.0686, pedigree (4,3,5,1,1)
  (same comment as for Amidosulfuron)
- Lead II [soil, agricultural]: 4.63556e-6 kg; source Nemecek, T. 2004; lognormal variance with pedigree 0.0986, pedigree (4,3,5,1,1)
  (same comment as for Cadmium II)
- MCPA [soil, agricultural]: 3.89975e-6 kg; lognormal variance with pedigree 0.0686, pedigree (4,3,5,1,1)
  (same comment as for Amidosulfuron)
- Mecoprop-P [soil, agricultural]: 5.06967e-6 kg; lognormal variance with pedigree 0.0686, pedigree (4,3,5,1,1)
  (same comment as for Amidosulfuron)
- Mefenpyr [soil, agricultural]: 9.74905e-8 kg; lognormal variance with pedigree 0.0686, pedigree (4,3,5,1,1)
  (same comment as for Amidosulfuron)
- Metconazole [soil, agricultural]: 8.77427e-7 kg; lognormal variance with pedigree 0.0686, pedigree (4,3,5,1,1)
  (same comment as for Amidosulfuron)
- Metsulfuron-methyl [soil, agricultural]: 6.00536e-8 kg; lognormal variance with pedigree 0.0686, pedigree (4,3,5,1,1)
  (same comment as for Amidosulfuron)
- Nickel II [soil, agricultural]: 2.35426e-6 kg; source Nemecek, T. 2004; lognormal variance with pedigree 0.0986, pedigree (4,3,5,1,1)
  (same comment as for Cadmium II)
- Oxydemeton-methyl [soil, agricultural]: 2.27349e-6 kg; lognormal variance with pedigree 0.0686, pedigree (4,3,5,1,1)
  (same comment as for Amidosulfuron)
- Parathion [soil, agricultural]: 1.67197e-6 kg; lognormal variance with pedigree 0.0686, pedigree (4,3,5,1,1)
  (same comment as for Amidosulfuron)
- Pendimethalin [soil, agricultural]: 1.88484e-5 kg; lognormal variance with pedigree 0.0686, pedigree (4,3,5,1,1)
  (same comment as for Amidosulfuron)
- Pirimicarb [soil, agricultural]: 1.12115e-6 kg; lognormal variance with pedigree 0.0686, pedigree (4,3,5,1,1)
  (same comment as for Amidosulfuron)
- Prochloraz [soil, agricultural]: 5.2645e-6 kg; lognormal variance with pedigree 0.0686, pedigree (4,3,5,1,1)
  (same comment as for Amidosulfuron)
- Propiconazole [soil, agricultural]: 2.35605e-6 kg; lognormal variance with pedigree 0.0686, pedigree (4,3,5,1,1)
  (same comment as for Amidosulfuron)
- Spiroxamine [soil, agricultural]: 1.60861e-5 kg; lognormal variance with pedigree 0.0686, pedigree (4,3,5,1,1)
  (same comment as for Amidosulfuron)
- Tebuconazole [soil, agricultural]: 1.33887e-5 kg; lognormal variance with pedigree 0.0686, pedigree (4,3,5,1,1)
  (same comment as for Amidosulfuron)
- Thifensulfuron-methyl [soil, agricultural]: 4.91362e-8 kg; lognormal variance with pedigree 0.0686, pedigree (4,3,5,1,1)
  (same comment as for Amidosulfuron)
- Triadimenol [soil, agricultural]: 1.17803e-6 kg; lognormal variance with pedigree 0.0686, pedigree (4,3,5,1,1)
  (same comment as for Amidosulfuron)
- Tribenuron [soil, agricultural]: 1.22513e-7 kg; lognormal variance with pedigree 0.0686, pedigree (4,3,5,1,1)
  (same comment as for Amidosulfuron)
- Trinexapac-ethyl [soil, agricultural]: 9.86917e-6 kg; lognormal variance with pedigree 0.0686, pedigree (4,3,5,1,1)
  (same comment as for Amidosulfuron)
- Zinc II [soil, agricultural]: 3.69231e-5 kg; lognormal variance with pedigree 0.0986, pedigree (4,3,5,1,1)
  Modelled, based on chapter 'Emissions of pesticides to agricultural soil' in "01_crop production_direct field emissions and natural resources_v1.0.pdf" - pfd-document on the dedicated talk page of econinvent (www.ecoinvent.og/documentation)
  Uncertainty: Calculated from the fertilizer input
- Nitrate [water, ground-]: 0.0662736 kg; lognormal variance with pedigree 0.0986, pedigree (4,3,5,1,1)
  Modelled, base on the 'SALCA-NO3 model' in "01_crop production_direct field emissions and natural resources_v1.0.pdf" - pfd-document on the dedicated talk page of econinvent (www.ecoinvent.og/documentation)
  Uncertainty: Calculated with standard method
- Phosphorus [water, ground-]: 2.20681e-5 kg; lognormal variance with pedigree 0.0986, pedigree (4,3,5,1,1)
  Modelled, based on chapter 'Emissions of pesticides to agricultural soil' in "01_crop production_direct field emissions and natural resources_v1.0.pdf" - pfd-document on the dedicated talk page of econinvent (www.ecoinvent.og/documentation)
  Uncertainty: Calculated with standard method
- Phosphorus [water, surface water]: 9.46753e-5 kg; lognormal variance with pedigree 0.0986, pedigree (4,3,5,1,1)
  (same comment as for Phosphorus)
- Water [water, ground-]: 0.0612479 m3; name water_to_water_ground; = water_irrigation_input*(1-fraction_IW_to_air)*fraction_IW_to_ground_water; lognormal variance with pedigree 0.1286, pedigree (4,3,5,1,4)
  Calculated value. See the parameters and their comments to understand the calculation.
  property fraction, origin: fresh water 1; name fraction_origin_fresh_water_Wgw
  property fraction, origin: salt water 0; name fraction_origin_salt_water_Wgw
  property fraction, origin: unspecified 0; name fraction_origin_unspecified_Wgw
- Water [water, surface water]: 0.015312 m3; name water_to_water_surface; = water_irrigation_input*(1-fraction_IW_to_air)*fraction_IW_to_surface_water; lognormal variance with pedigree 0.1286, pedigree (4,3,5,1,4)
  Calculated value. See the parameters and their comments to understand the calculation.
  property fraction, origin: fresh water 1; name fraction_origin_fresh_water_Wsw
  property fraction, origin: salt water 0; name fraction_origin_salt_water_Wsw

## Sampling procedure
Literature data

## Extrapolations
Transports are modelled with standard distances. Data for the usage of pesticides are taken from German production. Machine usage is modelled with German processings and diesel consumptions from Germany and Poland. Emissions are calculated with standard methods.

## Review by Niels Jungbluth 2006-09-05
Passed.
none

## Review by Bo Weidema 2012-01-19
In general, it is difficult or impossible to check the validity of the exchanges due to the limited documentation of each value, relying on an external model. However, since the dataset is an improvement compared to the previously existing dataset in the ecoinvent database, it is accepted. It is recommended to improve the transparency in the future, by integrating the model into the dataset and report the emissions from fertilisers separate from those of the plant production.
