# fish oil to generic market for energy feed

Dataset: EcoSpold 2, unit process
Geography: GLO
Time period: 2016-01-01 to 2022-12-31
Technology level: current
Classification: ISIC rev.4 ecoinvent: 1080:Manufacture of prepared animal feeds
Scenario: Business-as-Usual
System model: Substitution, consequential, long-term
Generated by: Avraam Symeonidis
Database: ecoinvent
isCopyrightProtected: true

## General comment
This activity is a linking activity, i.e. it connects fish oil with the generic market for energy feed. Fish oil is used partially as a feed for animals, thus traded on generic feed market with other protein - containing products.

## Included activities start
The activity starts with the reception of fish oil.

## Included activities end
Valid for all linking activities: The activity models the part of fish oil which contributes to the generic market for energy feed.

## Reference product
- fish oil, from anchovy: 1 kg; By-product classification allocatable product; CPC 21525: Fats and oils and their fractions, of fish, other than liver oils
  Fish oil from the coproduction of fishmeal and fish oil. The ratio between the two co-products is statistically variable.
  production volume 1 kg
  property ash content 0.1 kg; name ash
    Data for Peruvian anchovies FO
  property carbon content, non-fossil 0.7263; = (1-protein-fat-ash)*0.444+protein*0.535+fat*0.774
    Calculated from C_content = polysaccharids*0.444+protein*0.535+lipids*0.774 and polysaccharids = 1-(protein+lipids+ash)
  property energy content 38.6 MJ; name EC_FO
    Data for Peruvian anchovies FO
  property fat content 0.99; name fat
    Data for Peruvian anchovies FO
  property protein content 0; name protein
    Data for Peruvian anchovies FO
  properties: carbon allocation 0.7263 kg, carbon content 0.7263, dry mass 1 kg, price 0 EUR2005, water content 0, water in wet mass 0 kg, wet mass 1 kg

## Inputs from technosphere
- energy feed, gross: 1.77046, 36.8295 MJ (2 suppliers, which the file names only by identifier); sum of these 38.6 MJ; = EC_FO*DM_FO
  Calculated based on literature value for fish oil, 38.6 MJ/kg DM. Cross reference is 39 MJ/kg DM as reported in the Feedipedia.
  References:
  2014, Angel Avadí, Sustainability of the Peruvian anchoveta supply chains from sea to shelf: towards a new strategy for optimal use of resources, IRD, 3 - SeparatePublication, Thesis
  Feedipedia, Animal feed resources information system: Accessed at https://www.feedipedia.org/node/205 on 09/03/2018.
  production volume
    Calculated based on the annual production volume of fish, body oil and fish, liver oil as reported in FOSTAT.
    Refernce:
    Commodity Balances - Livestock and Fish Primary Equivalent, Accessed at http://www.fao.org/faostat/en/?#data/BL on 09/03/2018
  properties: dry mass 1 kg, price 0.0108 EUR2005, wet mass 1 kg
