# biomethane, low pressure burned in micro gas turbine 100kWe

Dataset: EcoSpold 2, unit process
Geography: RoW
Time period: 2000-01-01 to 2022-12-31
Technology level: current
Classification: ISIC rev.4 ecoinvent: 35:Electricity, gas, steam and air conditioning supply
Classification: EcoSpold01Categories: biomass/cogeneration
Tags: ConvertedDataset; with true value
Scenario: Business-as-Usual
System model: Substitution, consequential, long-term
Generated by: Alex Primas
Published in: Primas A. 2007
Database: ecoinvent
isCopyrightProtected: true

## General comment
The multioutput-process 'biogas, burned in micro gas turbine delivers the coproducts 'heat, biogas, allocation exergy, at micro gas turbine 100kWe' and 'electricity, biogas, allocation exergy, at micro gas turbine 100kWe'. The exergy allocation is the allocation scheme suggested to be used within the ecoinvent database (e.g. in electricity mixes).
[This dataset was already contained in the ecoinvent database version 2. It was not individually updated during the transfer to ecoinvent version 3. Life Cycle Impact Assessment results may still have changed, as they are affected by changes in the supply chain, i.e. in other datasets. This dataset was generated following the ecoinvent quality guidelines for version 2. It may have been subject to central changes described in the ecoinvent version 3 change report (http://www.ecoinvent.org/database/ecoinvent-version-3/reports-of-changes/), and the results of the central updates were reviewed extensively. The changes added e.g. consistent water flows and other information throughout the database. The documentation of this dataset can be found in the ecoinvent reports of version 2, which are still available via the ecoinvent website. The change report linked above covers all central changes that were made during the conversion process.]

## Included activities end
The module includes fuel input, infrastructure, emissions to air, and working materials for operation.

## Geography
Biogas input modelled for conditions in Switzerland. Process applicable in central European conditions.

## Technology
Radial turbine with recuperation for preheating the compressed air and fuel gas booster to increase gas pressure. Operation with refined biogas from low pressure gas network. Electrical efficiency 29%, total efficiency 75%. Operation as base load engine with low partial load hours.

## Reference product
- electricity, low voltage: 1 kWh; By-product classification allocatable product; CPC 17100: Electrical energy
  production volume 3.98 kWh
    This is a placeholder value that does not reflect real-world production volumes. This dataset does not currently require a real-world production volume to work in the database framework, and no actual data were collected yet. This has no negative effect on the results of the ecoinvent database.
  property price 0.107 EUR2005
    Temporary price data. Calculated as 90% of purchasers price based on: IEA Key world energy statistics 2004 (www.iea.org/textbase/nppdf/free/2004/keyworld2004.pdf)
  properties: carbon allocation 0 kg, carbon content 0, true value relation 3.6

## Inputs from technosphere
- biomethane, low pressure: 12 MJ
  properties: carbon content, non-fossil 0.695496, dry mass 0.0218341 kg, wet mass 0.0218341 kg
- heat, central or small-scale, other than natural gas: -5.3885, -0.01152 MJ (2 suppliers, which the file names only by identifier); sum of these -5.40002 MJ
  EcoSpold01Location=CH
  production volume
    Unknown
    Calculated from the production volume of methane, 96% by volume, from biogas, low pressure, at user in proportion to the respective output amounts.
  properties: exergy 0.169678 MJ, heating value, net 1 MJ, price 0.0106 EUR2005
  note on exergy: allocation factor for electricity (=1) vs. heat, where heat is calculated as the termodynamic mean temperature Tm = (Tfeed-Treturn)/ln(Tfeed/Treturn), relative to the application temperature (Tu, typically = 293 K), i.e. (Tm-Tu)/Tm
- lubricating oil: 6.00002e-6 kg; lognormal variance with pedigree 0.0432, pedigree (2,3,5,5,1)
  Company data
  EcoSpold01Location=RER
  Uncertainty: company data
  properties: carbon content, fossil 0.75, dry mass 1 kg, heating value, net 40.2 MJ, wet mass 1 kg
  note on carbon content, fossil: Lubricating oil is produced from diesel. C-content/dry mass of fats and oils considered 75%, from: ecoinvent v2.2 report, n 15a, pg 40
  note on heating value, net: Literature value, Source: IPCC 2006, 2006 IPCC Guidelines for National Greenhouse Gas Inventories, Prepared by the National Greenhouse Gas Inventories Programme, Eggleston H.S., Buendia L., Miwa K., Ngara T. and Tanabe K. (eds). Published: IGES, Japan
- maintenance, micro gas turbine, 100kW electrical: 1.194e-6 unit; lognormal variance with pedigree 0.0432, pedigree (2,3,5,5,1)
  Uncertainty of maintenance cycle
  EcoSpold01Location=CH
  Uncertainty: uncertainty of maintenance cycle
- micro gas turbine, 100kW electrical: 2.38801e-7 unit; lognormal variance with pedigree 0.3532, pedigree (2,3,5,5,1)
  EcoSpold01Location=CH
  Uncertainty of life time
  Uncertainty: uncertainty of life time
- storage, 10'000 l: 9.90004e-8 unit; lognormal variance with pedigree 0.3532, pedigree (2,3,5,5,1)
  EcoSpold01Location=RER
  Uncertainty of life time
  Uncertainty: uncertainty of life time
- waste mineral oil: -1.82404e-6, -4.77598e-6 kg (2 suppliers, which the file names only by identifier); sum of these -6.60003e-6 kg; lognormal variance with pedigree 0.0308, pedigree (4,3,2,5,1)
  EcoSpold01Location=CH
  Calculated from oil input
  Uncertainty: calculated from oil input
  production volume
    Calculated from the production volume of methane, 96% by volume, from biogas, low pressure, at user in proportion to the respective output amounts.
  properties: carbon content, fossil 0.864444, dry mass 0.9 kg, heating value, net 34.7 MJ, water content 0.111111, wet mass 1 kg
  note on carbon content, fossil: Tab A.6, ecoinvent v2.2 report 13_I. C content has been calculated after data in the tables, and then referred to 1 kg DM
  note on heating value, net: Value taken from the general comment of the treatment dataset.

## Emissions to nature
- Carbon dioxide, non-fossil [air, urban air close to ground]: 0.669339 kg; lognormal variance with pedigree 0.0512, pedigree (2,5,5,5,1)
  Calculated from composition of biogas
  Uncertainty: calculated from composition of biogas
- Carbon monoxide, non-fossil [air, urban air close to ground]: 0.000336001 kg; lognormal variance with pedigree 0.7112, pedigree (2,3,5,5,3)
  Estimate based on different references
  Uncertainty: estimate based on different references
- Dinitrogen monoxide [air, urban air close to ground]: 1.2e-5 kg; lognormal variance with pedigree 0.188, pedigree (4,5,5,5,4)
  Value for large natural gas power plants used as approximation
  Uncertainty: value for large natural gas power plants used as approximation
- Methane, non-fossil [air, urban air close to ground]: 6.48003e-5 kg; lognormal variance with pedigree 0.1186, pedigree (4,3,5,5,3)
  Estimate based on few references
  Uncertainty: estimate based on few references
- NMVOC, non-methane volatile organic compounds [air, urban air close to ground]: 7.20003e-6 kg; lognormal variance with pedigree 0.1186, pedigree (4,3,5,5,3)
  Estimate based on few references
  Uncertainty: estimate based on few references
- Nitrogen oxides [air, urban air close to ground]: 0.000384002 kg; lognormal variance with pedigree 0.1012, pedigree (2,3,5,5,3)
  Estimate based on different references
  Uncertainty: estimate based on different references
- Particulate Matter, < 2.5 um [air, urban air close to ground]: 6.00002e-6 kg; lognormal variance with pedigree 0.442, pedigree (4,4,5,5,4)
  (same comment as for Dinitrogen monoxide)
- Sulfur dioxide [air, urban air close to ground]: 6.60003e-6 kg; lognormal variance with pedigree 0.0592, pedigree (2,5,5,5,3)
  Approximation with data from natural gas network
  Uncertainty: approximation with data from natural gas network

## Sampling procedure
Literature data and manufacturer information

## Extrapolations
none This dataset has been copied from an original dataset covering the geography CH. The uncertainty has been adjusted accordingly.

## Review by Rolf Frischknecht 2007-08-13
passed
none
