# magnesium production, electrolysis

Dataset: EcoSpold 2, unit process
Geography: RoW
Time period: 2011-01-01 to 2022-12-31
Technology level: current
Classification: ISIC rev.4 ecoinvent: 2420:Manufacture of basic precious and other non-ferrous metals
Tags: single enterprise data
Scenario: Business-as-Usual
System model: Substitution, consequential, long-term
Share of production covered: 22 %
Generated by: Simone Ehrenberger
Published in: Simone Ehrenberger 2013
Database: ecoinvent
isCopyrightProtected: true

## General comment
In this process, magnesium is produced via electrolysis. The data represent the state of a specific plant located in Israel.

## Included activities start
The process starts at deyhdration and chlorination of carnallite at the factory gate.

## Included activities end
The process ends with the casting of pure magnesium ingots. No alloying elements are included.

## Allocation
Two by-products are produced: liquefied chlorine (Cl2) and KCl-rich salt. The first has a wide range of potential uses and the second one can be converted to potassium fertilizer.
No pre-defined allocation has been included in the model.

## Technology
Electrochemical processes to make magnesium are based on salts containing chloride which can be found naturally or are transformed from other raw materials like serpentine, magnesite, bischofite or carnallite. The magnesium chloride salts are dried with various processes in order to
receive anhydrous MgCl2.
The raw material for magnesium production in this activity is an anhydrous carnallite (MgCl2-KCl). In the process, KCl represents the electrolyte. In the course of the MgCl2 decomposition, the KCl content increases until the (spent) electrolyte is partly pumped out and replaced with new carnallite. Finally, two by-products are produced: liquefied chlorine (Cl2) and KCl-rich salt (70% KCl).
Magnesium oxide (MgO) is formed as an impurity during dehydration. Concerning the CO2/CO equilibrium in the calcination process, there are numerous reactions that take place in the chlorination chambers and the carbon can be consumed by reaction with MgO, air, water, sulfates and other impurities. Theoretically, the predominant reactions are those in which carbon dioxide is formed. Thus, it is assumed that the carbon is entirely converted to CO2. The CO2 emissions from graphite anode consumption are expected to contribute less than 1 % of the overall emissions and are neglected in the module. In practice, the off gases are not released to the atmosphere as is, as they are treated in wet alkali scrubbers. That is that some of the CO2 (be it from the reaction or from the ambient dilution air) is converted to calcium carbonate. The input of petroleum coke contributes less than 1 % to the overall GWP results and is excluded from this datasets for reasons of confidentiality.

## Reference product
- magnesium: 1 kg; name RP_amount_1; By-product classification allocatable product; CPC 41601: Tungsten, molybdenum, tantalum, magnesium, cobalt, cadmium, titanium, zirconium, beryllium, gallium, hafnium, […]; CAS 7439-95-4
  production volume is based on data from the US Geological Survey and an estimation on US Mg produciton (which is not included in the US Geological Survey statistic)
  production volume 1.07e8 kg
    data from USGS Minerals Information: Magnesium 2013
  property price 1.79941 EUR2005
    Price calculated based on the annual average price of magnesium metal reported in the USGS Minerals Yearbooks for Magnesium (2011 to 2019) in China, for the years 2010 to 2018.
    The prices were converted to EUR based on the annual exchange rates published by the European Central Bank (https://sdw.ecb.europa.eu/quickview.do?SERIES_KEY=120.EXR.A.USD.EUR.SP00.A, last accessed on 2022-02-15) and adjusted for inflation relative to 2005 using the producer price index (PPI) of the euro area, published by eurostat (https://appsso.eurostat.ec.europa.eu/nui/show.do?dataset=sts_inpp_a&lang=en, last accessed on 2022-05-04).
    Reference:
    USGS (2022). Magnesium Statistics and Information, USGS Minerals Yearbook (2011 to 2019). https://www.usgs.gov/centers/national-minerals-information-center/magnesium-statistics-and-information (last accessed on 2022-07-04).
  properties: carbon allocation 0 kg, carbon content 0, carbon content, fossil 0, carbon content, non-fossil 0, dry mass 1 kg, water content 0, water in wet mass 0 kg, wet mass 1 kg

## Inputs from technosphere
- chlorine, liquid: -0.4203, -2.0797 kg (2 suppliers, which the file names only by identifier); sum of these -2.5 kg; lognormal variance with pedigree 0.2106, pedigree (5,5,5,5,5)
  by-product; data from Mg producer (DLR / IMA study)
  production volume
    Calculated from production volume of reference product using the relative outputs.
  properties: dry mass 1 kg, price 0.148 EUR2005, wet mass 1 kg
- electricity, high voltage: 21.5 kWh; lognormal variance with pedigree 0.2106, pedigree (5,5,5,5,5)
  input should be electricity, low voltage rather than high voltage, but in order to link it to electricity production from natural gas, "high voltage" has been chosen; consumption data from Mg producer (DLR / IMA study);
- fly ash and scrubber sludge: -0.0284436, -0.000336675, -0.0112197 kg (3 suppliers, which the file names only by identifier); sum of these -0.04 kg; lognormal variance with pedigree 0.218, pedigree (4,5,5,5,5)
  waste from off gas treatment in wet alkali scrubbers; figure represents an estimation on the typical amount of such an electrolysis plant
  production volume
    Calculated from production volume of reference product using the relative outputs.
  properties: carbon content, fossil 0.167, dry mass 0.1 kg, water content 9, wet mass 1 kg
  note on carbon content, fossil: Tab A.6, ecoinvent v2.2 report 13_I. C content has been calculated after data in the tables, and then referred to 1 kg DM
- heat, central or small-scale, natural gas: 42.77 MJ; lognormal variance with pedigree 0.2106, pedigree (5,5,5,5,5)
  Data from Mg producer (DLR / IMA study)
  properties: heating value, net 1 MJ
- inert waste: -0.0529394, -0.000455951, -0.186605 kg (3 suppliers, which the file names only by identifier); sum of these -0.24 kg; lognormal variance with pedigree 0.25, pedigree (5,5,5,5,5)
  this waste is a proxy for the waste from the electrolysis process
  production volume
    Calculated from production volume of reference product using the relative outputs.
  properties: dry mass 1 kg, wet mass 1 kg
- magnesium factory: 2e-10 unit; lognormal variance with pedigree 0.51, pedigree (5,5,5,5,5)
  data from DLR / IMA study
- potassium chloride sludge: -3.85 kg; name BP_amount_4; lognormal variance with pedigree 0.2106, pedigree (5,5,5,5,5)
  The original by-product from this process is a mixture with a high content of potassium chloride (70% KCl). It is produced from the spent electrolyte and has slightly different properties than given in this dataset; It is named "potassium chloride sludge". Its potassium content is documented in the exchange properties. Further use of this by-product involve its utilisation for fertiliser purposes.
  production volume
    Calculated from production volume of reference product using the relative outputs.
  properties: dry mass 1 kg, oxygen content 0.118897, potassium content 0.581103, wet mass 1 kg
  note on oxygen content: Oxygen content (on a dry matter basis) of potassium chloride sludge is calculated from the molecular formula of the substance (70% K2O).
  note on potassium content: Potassium content (on a dry matter basis) of potassium chloride sludge is calculated from the molecular formula of the substance (70% K2O).
- refrigerant R134a: 0.000835 kg; lognormal variance with pedigree 0.2106, pedigree (5,5,5,5,5)
  data from Mg producer (DLR / IMA study)
  properties: carbon content, fossil 0.235294, dry mass 1 kg, heating value, net 9.51 MJ, wet mass 1 kg

## Inputs from nature
- Carnallite [natural resource, in water]: 11.41 kg; lognormal variance with pedigree 0.2106, pedigree (5,5,5,5,5)
  data from Mg producer (DLR / IMA study)

## Emissions to nature
- Ethane, 1,1,1,2-tetrafluoro-, HFC-134a [air, unspecified]: 0.0008 kg; lognormal variance with pedigree 0.2106, pedigree (5,5,5,5,5)
  data from DLR / IMA study
- Water [air, unspecified]: 0.004427 m3; lognormal variance with pedigree 0.2106, pedigree (5,5,5,5,5)
  from dehydration of carnallite
- Water [water, unspecified]: 0.000428 m3; lognormal variance with pedigree 0.2106, pedigree (5,5,5,5,5)
  data from DLR / IMA study

## Extrapolations
The dataset is scaled from the regional dataset "magnesium production, IL". The uncertainties have been adjusted accordingly.

## Review by Hans-Jörg Althaus 2014-02-04
ok
