# palm kernel meal to generic market for protein feed

Dataset: EcoSpold 2, unit process
Geography: GLO
Time period: 2012-01-01 to 2022-12-31
Technology level: current
Classification: ISIC rev.4 ecoinvent: 1080:Manufacture of prepared animal feeds
Scenario: Business-as-Usual
System model: Substitution, consequential, long-term
Generated by: Tereza Levova
Database: ecoinvent
isCopyrightProtected: true

## General comment
This activity is a linking activity, i.e. it connects palm kernel meal with generic protein feed market. Palm kernel meal is used mainly as a feed for animals, thus traded on generic feed market with other protein - containing products.

## Included activities end
Palm kernel meal is a by-product from palm oil production. This linking activity has the palm kernel meal as input and produces protein and energy feed as outputs.

## Parameters
- fraction_to_generic_market: 0.9 % (obsolete); lognormal variance with pedigree 0.108, pedigree (4,1,1,1,1)
  It is assumed that 90% of pal kernel meal is traded on generic protein feed market, i.e. its buyers do not care what type of protein feed they are buying. Remaining 10% of the production volume (PV) is assumed to be used for uses, where specific type of protein feed is required and cannot be substituted by any other protein feed.

## Reference product
- palm kernel meal: 1 kg; name palm_kernel_meal_IN; By-product classification allocatable product; CPC 23319: Preparations used in animal feeding n.e.c.
  production volume 1 kg
  property gross energy, feed per kg of dry mass 18.85 MJ/kg; name palm_kernel_mea_gross_E_feed_per_kg_DM_0
    Literature value from Agroscope database (http://www.feed-alp.admin.ch). Agroscope (http://www.agroscope.admin.ch/org/index.html?lang=en) is a research institute which belongs to the Swiss Federal Office for Agriculture.
  property price 0.061 EUR2005; name palm_kernel_meal_RP_price_EUR2005
    Temporary price data. Calculated as 90% of purchasers price based on: 2004 World Import/Export prices (tonnes and US$) from FaoStat statistics (http://faostat.fao.org/site/535/default.aspx#ancor, TRADE)- [Accessed 24 May 2010].
  property protein feed, 100% crude per kg of dry mass 0.197 kg/kg; name palm_kernel_mea_protein_feed_per_kg_DM_0
    (same comment as for palm kernel meal)
  properties: carbon allocation 0.45107 kg, carbon content 0.486591, carbon content, fossil 0, carbon content, non-fossil 0.486591, dry mass 0.927 kg, water content 0.0787487, water in wet mass 0.073 kg, wet mass 1 kg

## Inputs from technosphere
- energy feed, gross: 0.801476, 16.6725 MJ (2 suppliers, which the file names only by identifier); sum of these 17.4739 MJ; = palm_kernel_mea_gross_E_feed_per_kg_DM_0*0.927; lognormal variance with pedigree 0.0093, pedigree (4,3,1,3,1)
  Calculated based on literature value from Agroscope database (http://www.feed-alp.admin.ch). Agroscope (http://www.agroscope.admin.ch/org/index.html?lang=en) is a research institute which belongs to the Swiss Federal Office for Agriculture. The dry mass of the reference product is 0.927kg/kg.
  production volume
    Calculated from production volume of meal input using the relative outputs. 3.45E+10 kg of palm oil, crude was produced globally in 2005 (FAO). Based on "palm oil mill operation" activity for each 1 kg of palm, oil, crude produced 0.1468 kg of palm kernel meal is produced as a by-product. It is assumed that 90% of palm kernel meal is traded on generic protein feed market, i.e. its buyers do not care what type of protein feed they are buying. Remaining 10% of the production volume (PV) is assumed to be used for uses, where specific type of protein feed is required and cannot be substituted by any other protein feed.
  properties: dry mass 1 kg, price 0.0108 EUR2005, wet mass 1 kg
- protein feed, 100% crude: 0.182619 kg; name RP; = palm_kernel_mea_protein_feed_per_kg_DM_0*0.927
  (same comment as for energy feed, gross)
  production volume
    (same comment as for energy feed, gross)
  properties: carbon content, non-fossil 0.53, dry mass 1 kg, price 0.424 EUR2005, wet mass 1 kg

## Review by Bo Weidema 2012-03-14
Production volumes are for 2005, even though the dataset is indicated to be valid for 2012.
