# acetonitrile to generic market for solvent for chromatography analysis

Dataset: EcoSpold 2, unit process
Geography: GLO
Time period: 2005-01-01 to 2022-12-31
Technology level: current
Classification: ISIC rev.4 ecoinvent: 2022:Manufacture of paints, varnishes and similar coatings, printing ink and mas
Classification: EcoSpold01Categories: chemicals/organics
Scenario: Business-as-Usual
System model: Substitution, consequential, long-term
Generated by: Sofia Parada Tur
Database: ecoinvent
isCopyrightProtected: true

## General comment
This activity links the output of the market for acetonitrile to the generic market for solvent for chromatography analysis.
The market for acetonitrile is also a niche market. When a process demands acetonitrile as a solvent for chromatography analysis, this product needs to be obtained from the market for acetonitrile. In the other hand, when the process does not require a solvent for chromatography analysis with specific attributes, the consumption will be satisfied in the generic market for solvent for chromatography analysis.

## Geography
based on geographical validity of dataset Sohio process

## Technology
based on technology level of dataset for Sohio process

## Time period
based on temporal validity of dataset Sohio process

## Reference product
- acetonitrile: 1 kg; By-product classification allocatable product; CPC 34150: Amine-function compounds; oxygen-function amino-compounds, except lysine and its esters and salts thereof and […]; CAS 75-05-8
  production volume 1 kg
  property heating value, net 26.59 MJ
    LHV is calculated based on the elemental composition of the substance. Based on the CAS number of the substance (000075-05-8), the chemical formula of the substance is found to be: C2H3N, (PubChem 2020).
    Reference: Kim, S., Chen, J., Cheng, T., Gindulyte, A., He, J., He, S., Li, Q., Shoemaker, B. A., Thiessen, P. A., Yu, B., Zaslavsky, L., Zhang, J., & Bolton, E. E. (2019). PubChem 2019 update: improved access to chemical data. Nucleic acids research, 47(D1), D1102–D1109. https://doi.org/10.1093/nar/gky1033
  properties: carbon allocation 0.585366 kg, carbon content 0.585366, carbon content, fossil 0.585366, carbon content, non-fossil 0, dry mass 1 kg, price 0 EUR2005, water content 0, water in wet mass 0 kg, wet mass 1 kg

## Inputs from technosphere
- solvent for chromatography analysis: 1 kg
  production volume
    Based on total production volume of acetonitrile from the Sohio process PCI Acrylonitrile Ltd. Report (Ullmann's Encyclopedia of Industrial Chemistry indicates 6000 million kg).
    Source of other assumptions:
    - Approximately 70% of global supply of acetonitrile is consumed in the pharmaceutical industry.
    - For most applications in HPLC there is no substitute for acetonitrile.
    - In some cases, it is possible to replace acetonitrile with methanol - depending on the detection wavelengths in use. Therefore, it is assumed that only 10% of the high performance liquid chromatography (HPLC) applications with acetonitrile can be substituted by another solvent.
  properties: carbon content, fossil 0.375, dry mass 1 kg, heating value, net 11.36 MJ, price 0.968 EUR2005, wet mass 1 kg

## Review by Eric Johnson 2012-02-17
I accept these revisions.

## Review by Bo Weidema 2012-02-17
This dataset has only been reviewed by two reviewers. Considering the simple nature of the dataset, this may be seen as acceptable.
