# decarboxylative cyclization of adipic acid

Dataset: EcoSpold 2, unit process
Geography: RoW
Time period: 2010-01-01 to 2022-12-31
Technology level: current
Classification: ISIC rev.4 ecoinvent: 2011:Manufacture of basic chemicals
Scenario: Business-as-Usual
System model: Substitution, consequential, long-term
Generated by: Jürgen Sutter
Database: ecoinvent
isCopyrightProtected: true

## General comment
Decarboxylative cyclization of adipic acid is an important process for the production of cyclopentanone.
C6H7O4 → C5H6O + H2O + CHO2
This reaction may be carried out in the liquid phase at 350 °C over zeolites with adipic acid esters. A further production route is oxidation of cyclopentene with oxygen in the presence of palladium (II) chloride or copper (II) chloride as catalyst.

2-Cyclopentanone (C5H8O; CAS 120-92-3) is a colourless liquid with a pleasant, slightly pepperminty odour. It is soluble in water and miscible with common organic solvents.
Cyclopentanone is used in fragrances and as an intermediate in organic synthesis, e.g., for the synthesis of pharmaceuticals (such as cyclopentobarbital), jasmones, or cyclopentylamine. The latter is used for fungicides such as Pencycuron (Bayer). The use of cyclopentanone as a special solvent for polycarbonates has been reported
Frischknecht R., Jungbluth N., Althaus H.-J., Doka G., Dones R., Heck T., Hellweg S., Hischier R., Nemecek T., Rebitzer G. and Spielmann M. (2007) Overview and Methodology. Final report ecoinvent v2.0 No. 1. Swiss Centre for Life Cycle Inventories, Dübendorf, CH, retrieved from: www.ecoinvent.org.

Gendorf (2000) Umwelterklärung 2000, Werk Gendorf. Werk Gendorf, Burgkirchen as pdf-File under: http://www.gendorf.de/pdf/umwelterklaerung2000.pdf

Hardo Siegel/Manfred Eggersdorfer: Ketones. Published online: 2000. In: Ullmann's Encyclopedia of Industrial Chemistry, Seventh Edition, 2004 Electronic Release (ed. Fiedler E., Grossmann G., Kersebohm D., Weiss G. and Witte C.). 7 th Electronic Release Edition. Wiley InterScience, New York, DOI: 10.1002/14356007.a15_077

## Included activities end
Decarboxylative cyclization of adipic acid including materials, energy uses, infrastructure and emissions.

## Geography
The inventory is modelled for the world.

## Technology
decarboxylative cyclization of adipic acid

## Time period
Time of publications

## Parameters
- fraction, cooling water, cooling pond system, to air: 0.032 dimensionless; name fraction_CW_CP_to_air; lognormal variance with pedigree 0.0413, pedigree (2,3,1,3,1)
  Calculated based on literature value (Scown, C.D., 2011, Water Footprint of U.S. Transportation Fuels and supplying information of the article) (Vionnet, S., Quantis Water Database - Technical Report, 2012).
- fraction, cooling water, once-through system, to air: 0.004 dimensionless; name fraction_CW_OT_to_air; lognormal variance with pedigree 0.0413, pedigree (2,3,1,3,1)
  (same comment as for fraction, cooling water, cooling pond system, to air)
- fraction, cooling water, recirculating system, to air: 0.771 dimensionless; name fraction_CW_R_to_air; lognormal variance with pedigree 0.0413, pedigree (2,3,1,3,1)
  (same comment as for fraction, cooling water, cooling pond system, to air)
- fraction, cooling water, to air: 0.3875 dimensionless; name fraction_CW_to_air; = (0.5*fraction_CW_OT_to_air)+(0.5*fraction_CW_R_to_air); lognormal variance with pedigree 0.092025, pedigree (4,4,3,2,4)
  Calculated value based on literature value (see comments of the other parametres present in this dataset) and expert opinion. In the case when no industry/literature data are available about the type of cooling or directly fraction, cooling water, to air specific for the process a default assumption is applied. It is assumed that the once-through cooling system is used in 50% of all cases and recirculating system is used in another 50% of all cases.

## Reference product
- 2-cyclopentone: 1 kg; name RP_amount_1; By-product classification allocatable product; CPC 34110: Hydrocarbons and their halogenated, sulphonated, nitrated or nitrosated derivatives; CAS 930-30-3
  Stoichiometric calculation
  production volume 7e6 kg
    Expert judgement
  property carbon content, fossil 0.713938
    Calculated based on molecular structure. See tab "chemicals".
  property heating value, net 21.63 MJ
    LHV is calculated based on the Carbon content of the product. More details can be found on the respective documentation.
  property price 1.14 EUR2005
    Average 2005 prices for EU27, USA, China, Japan and India from Import/Export data (US$ and tonnes) in UN Commodity Trade Statistics Database; Commodity: Cyclohexanone and methylcyclohexanones
  properties: carbon allocation 0.713938 kg, carbon content 0.713938, carbon content, non-fossil 0, dry mass 1 kg, water content 0, water in wet mass 0 kg, wet mass 1 kg

## Inputs from technosphere
- adipic acid: 1.83486 kg; lognormal variance with pedigree 0.0807, pedigree (1,3,5,3,1)
  properties: carbon content, fossil 0.493151, dry mass 1 kg, heating value, net 23.23 MJ, wet mass 1 kg
- chemical factory, organics: 4e-10 unit; lognormal variance with pedigree 0.218, pedigree (4,5,5,5,5)
  Estimation
- electricity, medium voltage: 0.0316495, 0.0219264, 0.00117524, 0.261129, 0.00118417, 0.0150453 kWh (6 suppliers, which the file names only by identifier); sum of these 0.33211 kWh; lognormal variance with pedigree 0.218, pedigree (4,5,5,5,5)
  Estimation
- formic acid: -0.548624 kg; name BP_amount_1; lognormal variance with pedigree 0.0807, pedigree (1,3,5,3,1)
  Stoichiometric calculation
  production volume
    Calculated from production volume of reference product using the relative outputs.
  properties: carbon content, fossil 0.4, dry mass 1 kg, heating value, net 13.17 MJ, price 0.404 EUR2005, wet mass 1 kg
- heat, from steam, in chemical industry: 2 MJ; lognormal variance with pedigree 0.218, pedigree (4,5,5,5,5)
  Estimation
  properties: heating value, net 1 MJ

## Inputs from nature
- Water, cooling, unspecified natural origin [natural resource, in water]: 0.0240367 m3; name water_cooling_UNO_input; lognormal variance with pedigree 0.218, pedigree (4,5,5,5,5)
  Estimation
  Estimation

## Emissions to nature
- Carbon dioxide, fossil [air, urban air close to ground]: 0.169358 kg; lognormal variance with pedigree 0.1786, pedigree (4,5,5,5,5)
  From water treatment
- Water [air, unspecified]: 0.00931422 m3; name water_to_air_unspecified; = water_cooling_UNO_input*fraction_CW_to_air; lognormal variance with pedigree 0.130025, pedigree (4,4,5,2,4)
  Calculated value based on literature values and expert opinion. See comments in the parametres' comment field.
  property fraction, origin: fresh water 0; name fraction_origin_fresh_water
  property fraction, origin: salt water 0; name fraction_origin_salt_water
  property fraction, origin: unspecified 1; name fraction_origin_unspecified
- Water [water, unspecified]: 0.0147225 m3; name water_to_water_unspecified; = water_cooling_UNO_input*(1-fraction_CW_to_air); lognormal variance with pedigree 0.130025, pedigree (4,4,5,2,4)
  (same comment as for Water)
  property fraction, origin: fresh water 0; name fraction_origin_fresh_water_Ww
  property fraction, origin: salt water 0; name fraction_origin_salt_water_Ww
  property fraction, origin: unspecified 1; name fraction_origin_unspecified_Ww
