# ethephon production

Dataset: EcoSpold 2, unit process
Geography: GLO
Time period: 2020-01-01 to 2022-12-31
Technology level: current
Classification: ISIC rev.4 ecoinvent: 2011:Manufacture of basic chemicals
Synonyms: Ethrel, Florel, Cerone, Chipco,Prep, Flordimex, Arvest Etheverse
Scenario: Business-as-Usual
System model: Substitution, consequential, long-term
Generated by: Daria Dellenbach
Database: ecoinvent
isCopyrightProtected: true

## General comment
This dataset represents the production of 1 kg of ethephon. Emissions are estimated. Energy consumptions, infrastructure and transports are calculated with standard values. An overall yield of 90 % was assumed.
Ethephon is an organic substance with the CAS no.: 016672-87-0. It is called '2-chloroethylphosphonic acid' under IUPAC naming and its molecular formula is: C2H6ClO3P. It is solid under normal conditions of temperature and pressure as a white, waxy solid or a white, crystalline powder. It is modelled as a pure substance. Ethephon is a widely used plant growth regulator. It increases the rate of ripening of plants by promoting release of ethylene (e.g. tomatoes, cherries, and citrus fruit), stabilises stalks of several plant (e.g. barley and rice), promotes the flower induction (e.g. pineapples) and increases yields in rubber plantations. There are no publicly available information about the consumption of this substance on industrial sites.
Reference(s):
Sauter H., Zeeh B., (2009): Plant Growth Regulators, in Ullmanns Encyclopedia of Industrial Chemistry, Weinheim, Wiley-VCH.
Chemiepark GENDORF, Umwelterklärung 2016, https://www.gendorf.de/Nachbarn/Umweltschutz/Industrie%20und%20Nachhaltigkeit
Chemiepark GENDORF, Umwelterklärung 2017, https://www.gendorf.de/Nachbarn/Umweltschutz/Industrie%20und%20Nachhaltigkeit
Chemiepark GENDORF, Umwelterklärung 2020, https://www.gendorf.de/Nachbarn/Umweltschutz/Industrie%20und%20Nachhaltigkeit
Unger T., (1996). Pesticide Synthesis Handbook, Noyes Publication.
Svara J., Weferling N., Hofmann T., (2011). Phosphorus Compounds, Organic, Ullmanns Encyclopedia of Industrial Chemistry, Weinheim, Wiley-VCH.
Hischier, R. (2005) Establishing Life Cycle Inventories of Chemicals Based on Differing Data Availability (9 pp). The International Journal of Life Cycle Assessment, Volume 10, Issue 1, pp 59–67. 10.1065/lca2004.10.181.7

## Included activities start
Cradle to gate. The activity starts when the raw materials enter the process.

## Included activities end
Production of ethephon production including materials, energy uses, infrastructure and emissions.

## Technology
Ethephon is produced in two steps from ethylene oxide and phosphorus trichloride.
PCl3 + 3 C2H4O --> C6H12O3PCl3
C6H12O3PCl3 + 2 HCl--> C2H6O3PCl + 2 C2H4Cl2
Ethylene dichloride is produced as a by-product.
Reference(s):
Sauter H., Zeeh B., (2009): Plant Growth Regulators, in Ullmanns Encyclopedia of Industrial Chemistry, Weinheim, Wiley-VCH.
Unger T., (1996). Pesticide Synthesis Handbook, Noyes Publication.
Svara J., Weferling N., Hofmann T., (2011). Phosphorus Compounds, Organic, Ullmanns Encyclopedia of Industrial Chemistry, Weinheim, Wiley-VCH.

## Reference product
- ethephon: 1 kg; name RP; By-product classification allocatable product; CPC 34663: Herbicides, anti-sprouting products and plant-growth regulators; CAS 16672-87-0
  production volume 3.60564e7 kg
    Calculated value. The global production volume is extrapolated from the German and US production volumes using the global average GDP (constant 2017 international USD from 2015-2019). The annual production value of Germany in the year 2017 is 2375000 kg and the US production volume in 2017 is 4681246.60000001 kg. This value is divided by the German share of global GDP, 3.57% (2015-2019), and the US share, 16.00% (2015-2019).
    References:
    Bundesamt für Verbraucherschutz und Lebensmittelsicherheit (2018): Absatz an Pflanzenschutzmitteln in der Bundesrepublik Deutschland 2017, available here: https://www.bvl.bund.de/SharedDocs/Downloads/04_Pflanzenschutzmittel/01_meldungen_par_64/meld_par_64_2017.pdf?__blob=publicationFile&v=2, accessed 07-06-2022.
    U.S. Geological Survey (2018): Estimated Annual Agricultural Pesticide Use, available here: https://water.usgs.gov/nawqa/pnsp/usage/maps/county-level/, accessed 07-06-2022.
    World bank (2022): GDP, available here: https://data.worldbank.org/indicator/NY.GDP.MKTP.PP.KD, accessed 17-05-2022.
  property price 5.34431 EUR2005
    The price is calculated based on Made-in-China (available here: https://www.made-in-china.com/products-search/hot-china-products/ethephon_price.html, last accessed 2022-06-13).
    The prices were converted to EUR based on the annual exchange rates published by the European Central Bank (https://sdw.ecb.europa.eu/quickview.do?SERIES_KEY=120.EXR.A.USD.EUR.SP00.A, last accessed on 2022-02-15) and adjusted for inflation relative to 2005 using the producer price index (PPI) of the euro area, published by eurostat (https://appsso.eurostat.ec.europa.eu/nui/show.do?dataset=sts_inpp_a&lang=en, last accessed on 2022-05-04).
  properties: carbon allocation 0.166253 kg, carbon content 0.166253, carbon content, fossil 0.166253, carbon content, non-fossil 0, dry mass 1 kg, water content 0, water in wet mass 0 kg, wet mass 1 kg

## Inputs from technosphere
- chemical factory, organics: 1.148e-9 unit; lognormal variance with pedigree 0.3494, pedigree (2,5,2,4,4)
  Calculated based on literature data published by the industry. For this activity, no information was readily available concerning infrastructure and land-use. Therefore, the infrastructure is estimated based on data from two chemical factories, the BASF site of Ludwigshafen and the chemical factory in Gendorf (which are both located in Germany), which produce a wide range of chemical substances. Based on this data, the following assumptions are made: the built area amounts to about 4.2 ha, the plant has an average output of 50'000 t/a and a lifespan of fifty years. The estimated infrastructure amount is therefore 4.00 E-10 units per kg of produced chemical.
  Since this process comprises 2 reactions to produce the final product, the default value was scaled up. To produce 1 kg of output, 1.87 kg of intermediate products are necessary. The value was therefore scaled up with the factor 2.87.
  References:
  Althaus H.-J., Chudacoff M., Hischier R., Jungbluth N., Osses M. and Primas A. (2007) Life Cycle Inventories of Chemicals. ecoinvent report No. 8, v2.0. EMPA Dübendorf, Swiss Centre for Life Cycle Inventories, Dübendorf, CH.
  Gendorf (2000) Umwelterklärung 2000, Werk Gendorf. Werk Gendorf, Burgkirchen.
- compressed air, 1000 kPa gauge: 0.922369, 0.37533 m3 (2 suppliers, which the file names only by identifier); sum of these 1.2977 m3; lognormal variance with pedigree 0.05, pedigree (2,5,2,4,4)
  Calculated based on literature data published by the GENDORF Chemical Park. The factory produced an average of 2462760 tonnes of chemical substances (including intermediates) per year in the years 2015-2019. The average consumption of compressed air in the years 2015-2019 was 1113557454 m3 per year. This equals 0.45216 m3/kg chemical produced.
  Since this process comprises 2 reactions to produce the final product, the default value was scaled up. To produce 1 kg of output, 1.87 kg of intermediate products are necessary. The value was therefore scaled up with the factor 2.87.
  References:
  Chemiepark GENDORF, Umwelterklärung 2016, https://www.gendorf.de/Nachbarn/Umweltschutz/Industrie%20und%20Nachhaltigkeit
  Chemiepark GENDORF, Umwelterklärung 2017, https://www.gendorf.de/Nachbarn/Umweltschutz/Industrie%20und%20Nachhaltigkeit
  Chemiepark GENDORF, Umwelterklärung 2020, https://www.gendorf.de/Nachbarn/Umweltschutz/Industrie%20und%20Nachhaltigkeit
- electricity, medium voltage: 1.1453 kWh; lognormal variance with pedigree 0.05, pedigree (2,5,2,4,4)
  Calculated based on literature data published by the GENDORF Chemical Park. The factory produced an average of 2462760 tonnes of chemical substances (including intermediates) per year in the years 2015-2019. The average consumption of electricity in the years 2015-2019 was 982796751 kWh per year. This equals 0.39906 kWh/kg chemical produced.
  Since this process comprises 2 reactions to produce the final product, the default value was scaled up. To produce 1 kg of output, 1.87 kg of intermediate products are necessary. The value was therefore scaled up with the factor 2.87.
  References:
  Chemiepark GENDORF, Umwelterklärung 2016, https://www.gendorf.de/Nachbarn/Umweltschutz/Industrie%20und%20Nachhaltigkeit
  Chemiepark GENDORF, Umwelterklärung 2017, https://www.gendorf.de/Nachbarn/Umweltschutz/Industrie%20und%20Nachhaltigkeit
  Chemiepark GENDORF, Umwelterklärung 2020, https://www.gendorf.de/Nachbarn/Umweltschutz/Industrie%20und%20Nachhaltigkeit
- ethylene dichloride: -1.21563, -0.15407 kg (2 suppliers, which the file names only by identifier); sum of these -1.3697 kg
  Calculated based on stoichiometry. See technology comment for the description of the reaction.
  production volume
    Calculated from the production volume of the reference product in proportion to the respective output amounts.
  properties: carbon content, fossil 0.244898, dry mass 1 kg, heating value, net 12.25 MJ, price 0.256557 EUR2005, wet mass 1 kg
- ethylene oxide: 0.65096, 0.321482 kg (2 suppliers, which the file names only by identifier); sum of these 0.972442 kg; lognormal variance with pedigree 0.010025, pedigree (2,5,2,2,2)
  (same comment as for ethylene dichloride)
  properties: carbon content, fossil 0.545455, dry mass 1 kg, heating value, net 27.53 MJ, wet mass 1 kg
- heat, district or industrial, natural gas: 5.41425 MJ; lognormal variance with pedigree 0.05, pedigree (2,5,2,4,4)
  Calculated based on literature data published by the GENDORF Chemical Park. The factory produced an average of 2462760 tonnes of chemical substances (including intermediates) per year in the years 2015-2019. The average consumption of natural gas in the years 2015-2019 was 4645920000 MJ per year. This equals 1.8865 MJ/kg chemical produced.
  Since this process comprises 2 reactions to produce the final product, the default value was scaled up. To produce 1 kg of output, 1.87 kg of intermediate products are necessary. The value was therefore scaled up with the factor 2.87.
  References:
  Chemiepark GENDORF, Umwelterklärung 2016, https://www.gendorf.de/Nachbarn/Umweltschutz/Industrie%20und%20Nachhaltigkeit
  Chemiepark GENDORF, Umwelterklärung 2017, https://www.gendorf.de/Nachbarn/Umweltschutz/Industrie%20und%20Nachhaltigkeit
  Chemiepark GENDORF, Umwelterklärung 2020, https://www.gendorf.de/Nachbarn/Umweltschutz/Industrie%20und%20Nachhaltigkeit
  properties: heating value, net 1 MJ
- heat, from steam, in chemical industry: 0.506996, 0.0893898 MJ (2 suppliers, which the file names only by identifier); sum of these 0.596386 MJ; lognormal variance with pedigree 0.05, pedigree (2,5,2,4,4)
  Calculated based on literature data published by the GENDORF Chemical Park. The factory produced an average of 2462760 tonnes of chemical substances (including intermediates) per year in the years 2015-2019. The average consumption of steam (internal and external sources) in the years 2015-2019 was 511785800 MJ per year. This equals 0.2078 MJ/kg chemical produced.
  Since this process comprises 2 reactions to produce the final product, the default value was scaled up. To produce 1 kg of output, 1.87 kg of intermediate products are necessary. The value was therefore scaled up with the factor 2.87.
  References:
  Chemiepark GENDORF, Umwelterklärung 2016, https://www.gendorf.de/Nachbarn/Umweltschutz/Industrie%20und%20Nachhaltigkeit
  Chemiepark GENDORF, Umwelterklärung 2017, https://www.gendorf.de/Nachbarn/Umweltschutz/Industrie%20und%20Nachhaltigkeit
  Chemiepark GENDORF, Umwelterklärung 2020, https://www.gendorf.de/Nachbarn/Umweltschutz/Industrie%20und%20Nachhaltigkeit
  properties: heating value, net 1 MJ
- hydrochloric acid, without water, in 30% solution state: 0.0932627, 0.44273 kg (2 suppliers, which the file names only by identifier); sum of these 0.535992 kg; lognormal variance with pedigree 0.01, pedigree (2,5,2,1,2)
  (same comment as for ethylene dichloride)
  properties: dry mass 1 kg, heating value, net 3.32 MJ, wet mass 1 kg
- nitrogen, liquid: 0.0212552, 0.0212552 kg (2 suppliers, which the file names only by identifier); sum of these 0.0425104 kg; lognormal variance with pedigree 0.05, pedigree (2,5,2,4,4)
  Calculated based on literature data published by the GENDORF Chemical Park. The factory produced an average of 2462760 tonnes of chemical substances (including intermediates) per year in the years 2015-2019. The average consumption of nitrogen, liquid in the years 2015-2019 was 29168033 m3 per year. This equals 0.014812 kg/kg chemical produced. The density to convert to kg was assumed to be 1.2506 kg/m3.
  Since this process comprises 2 reactions to produce the final product, the default value was scaled up. To produce 1 kg of output, 1.87 kg of intermediate products are necessary. The value was therefore scaled up with the factor 2.87.
  References:
  Chemiepark GENDORF, Umwelterklärung 2016, https://www.gendorf.de/Nachbarn/Umweltschutz/Industrie%20und%20Nachhaltigkeit
  Chemiepark GENDORF, Umwelterklärung 2017, https://www.gendorf.de/Nachbarn/Umweltschutz/Industrie%20und%20Nachhaltigkeit
  Chemiepark GENDORF, Umwelterklärung 2020, https://www.gendorf.de/Nachbarn/Umweltschutz/Industrie%20und%20Nachhaltigkeit
  properties: dry mass 1 kg, wet mass 1 kg
- phosphorus trichloride: 1.00877 kg; lognormal variance with pedigree 0.010025, pedigree (2,5,2,2,2)
  (same comment as for ethylene dichloride)
- tap water: 0.064575 kg; lognormal variance with pedigree 0.05, pedigree (2,5,2,4,4)
  Calculated based on literature data published by the GENDORF Chemical Park. The factory produced an average of 2462760 tonnes of chemical substances (including intermediates) per year in the years 2015-2019. The average consumption of tap water in the years 2015-2019 was 55352 t per year. This equals 0.0225 kg/kg chemical produced.
  Since this process comprises 2 reactions to produce the final product, the default value was scaled up. To produce 1 kg of output, 1.87 kg of intermediate products are necessary. The value was therefore scaled up with the factor 2.87.
  References:
  Chemiepark GENDORF, Umwelterklärung 2016, https://www.gendorf.de/Nachbarn/Umweltschutz/Industrie%20und%20Nachhaltigkeit
  Chemiepark GENDORF, Umwelterklärung 2017, https://www.gendorf.de/Nachbarn/Umweltschutz/Industrie%20und%20Nachhaltigkeit
  Chemiepark GENDORF, Umwelterklärung 2020, https://www.gendorf.de/Nachbarn/Umweltschutz/Industrie%20und%20Nachhaltigkeit
  properties: carbon content, fossil 0.00178991, dry mass 0.000337476 kg, water content 2962.17, wet mass 1 kg
  note on carbon content, fossil: Bicarbonate content is 2.93 mol/m3. CO2 content is 0.1 mol/m3 (ecoinvent v2.2 report 8, Tab 93.1).
- wastewater, average: -1.25143e-6, -1.86332e-8, -5.23348e-6, -3.14503e-8 m3 (4 suppliers, which the file names only by identifier); sum of these -6.53499e-6 m3; lognormal variance with pedigree 0.0498, pedigree (2,5,1,4,4)
  Calculated based on literature data published by the GENDORF Chemical Park. The factory produced an average of 2462760 tonnes of chemical substances (including intermediates) per year in the years 2015-2019. The average ouput of wastewater going to an external wastewater treatment plant in the years 2015-2019 was 5608 m3 per year. This equals 0.000002277 m3/kg chemical produced.
  Since this process comprises 2 reactions to produce the final product, the default value was scaled up. To produce 1 kg of output, 1.87 kg of intermediate products are necessary. The value was therefore scaled up with the factor 2.87.
  References:
  Chemiepark GENDORF, Umwelterklärung 2016, https://www.gendorf.de/Nachbarn/Umweltschutz/Industrie%20und%20Nachhaltigkeit
  Chemiepark GENDORF, Umwelterklärung 2017, https://www.gendorf.de/Nachbarn/Umweltschutz/Industrie%20und%20Nachhaltigkeit
  Chemiepark GENDORF, Umwelterklärung 2020, https://www.gendorf.de/Nachbarn/Umweltschutz/Industrie%20und%20Nachhaltigkeit
  production volume
    (same comment as for ethylene dichloride)
  properties: carbon content, non-fossil 0.194039, dry mass 0.346837 kg, water content 2882.2, wet mass 1000 kg
  note on carbon content, non-fossil: 0.0673 kg TOC/m3 (Tab A.17, ecoinvent v2.2 report 13_I). TOC was considered as Total Carbon.

## Inputs from nature
- Water, cooling, unspecified natural origin [natural resource, in water]: 0.0422091 m3; lognormal variance with pedigree 0.05, pedigree (2,5,2,4,4)
  Calculated based on literature data published by the GENDORF Chemical Park. The factory produced an average of 2462760 tonnes of chemical substances (including intermediates) per year in the years 2015-2019. The average amount of cooling water released in the years 2015-2019 was 34408800 t per year. It was assumed that 5% of the cooling water was emitted to air during its use, therefore, to calculate the input of cooling water, the output value reported by GENDORF was scaled up by the factor 1/0.95. This equals 0.014707 m3/kg chemical produced.
  Since this process comprises 2 reactions to produce the final product, the default value was scaled up. To produce 1 kg of output, 1.87 kg of intermediate products are necessary. The value was therefore scaled up with the factor 2.87.
  References:
  Chemiepark GENDORF, Umwelterklärung 2016, https://www.gendorf.de/Nachbarn/Umweltschutz/Industrie%20und%20Nachhaltigkeit
  Chemiepark GENDORF, Umwelterklärung 2017, https://www.gendorf.de/Nachbarn/Umweltschutz/Industrie%20und%20Nachhaltigkeit
  Chemiepark GENDORF, Umwelterklärung 2020, https://www.gendorf.de/Nachbarn/Umweltschutz/Industrie%20und%20Nachhaltigkeit
- Water, river [natural resource, in water]: 0.00277078 m3; lognormal variance with pedigree 0.05, pedigree (2,5,2,4,4)
  Calculated based on literature data published by the GENDORF Chemical Park. The factory produced an average of 2462760 tonnes of chemical substances (including intermediates) per year in the years 2015-2019. The average consumption of river water in the years 2015-2019 was 22000820 t per year. However, since the cooling water is modelled as an input, the amount of river water was adjusted to avoid double counting. 55% of the input amount of cooling water was deducted from the amount of river water, as that is the share of river water versus well water. This equals 0.00096543 m3/kg chemical produced.
  Since this process comprises 2 reactions to produce the final product, the default value was scaled up. To produce 1 kg of output, 1.87 kg of intermediate products are necessary. The value was therefore scaled up with the factor 2.87.
  References:
  Chemiepark GENDORF, Umwelterklärung 2016, https://www.gendorf.de/Nachbarn/Umweltschutz/Industrie%20und%20Nachhaltigkeit
  Chemiepark GENDORF, Umwelterklärung 2017, https://www.gendorf.de/Nachbarn/Umweltschutz/Industrie%20und%20Nachhaltigkeit
  Chemiepark GENDORF, Umwelterklärung 2020, https://www.gendorf.de/Nachbarn/Umweltschutz/Industrie%20und%20Nachhaltigkeit
- Water, well, in ground [natural resource, in water]: 0.00234341 m3; lognormal variance with pedigree 0.05, pedigree (2,5,2,4,4)
  Calculated based on literature data published by the GENDORF Chemical Park. The factory produced an average of 2462760 tonnes of chemical substances (including intermediates) per year in the years 2015-2019. The average consumption of well water in the years 2015-2019 was 18607480 t per year. However, since the cooling water is modelled as an input, the amount of well water was adjusted to avoid double counting. 45% of the input amount of cooling water was deducted from the amount of well water, as that is the share of well water versus river water. This equals 0.00081652 m3/kg chemical produced.
  Since this process comprises 2 reactions to produce the final product, the default value was scaled up. To produce 1 kg of output, 1.87 kg of intermediate products are necessary. The value was therefore scaled up with the factor 2.87.
  References:
  Chemiepark GENDORF, Umwelterklärung 2016, https://www.gendorf.de/Nachbarn/Umweltschutz/Industrie%20und%20Nachhaltigkeit
  Chemiepark GENDORF, Umwelterklärung 2017, https://www.gendorf.de/Nachbarn/Umweltschutz/Industrie%20und%20Nachhaltigkeit
  Chemiepark GENDORF, Umwelterklärung 2020, https://www.gendorf.de/Nachbarn/Umweltschutz/Industrie%20und%20Nachhaltigkeit

## Emissions to nature
- Carbon dioxide, fossil [air, unspecified]: 0.196563 kg; lognormal variance with pedigree 0.010025, pedigree (2,5,2,2,2)
  Calculated based on the carbon content of unreacted chemical substances. The unreacted chemicals are assumed to go to wastewater treatment, which has a conversion rate in biological treatment of 95% of carbon into carbon dioxide. The remaining 5% are released as emissions to water, unspecified.
- Ethane, 1,2-dichloro- [air, unspecified]: 0.00530966 kg; lognormal variance with pedigree 0.049425, pedigree (2,5,2,2,2)
  Calculated losses, based on the boiling point of a chemical, to water or to air. In addition, unreacted chemicals are assumed to go to wastewater treatment, which has a conversion rate in biological treatment of 95% of carbon into carbon dioxide. The remaining 5% are released as emissions to water.
- Ethylene oxide [air, unspecified]: 0.00486221 kg; lognormal variance with pedigree 0.049425, pedigree (2,5,2,2,2)
  (same comment as for Ethane, 1,2-dichloro-)
- Hydrochloric acid [air, unspecified]: 0.00152401 kg; lognormal variance with pedigree 0.049425, pedigree (2,5,2,2,2)
  (same comment as for Ethane, 1,2-dichloro-)
- Nitrogen [air, unspecified]: 0.0425104 kg; lognormal variance with pedigree 0.0894, pedigree (2,5,2,4,4)
  Calculated value. The amount of nitrogen released to air is equal to the amount of nitrogen entering the activity.
  Since this process comprises 4 reactions to produce the final product, the default value was scaled up. To produce 1 kg of output, 3.85 kg of intermediate products are necessary. The value was therefore scaled up with the factor 4.85.
- Phosphorus trichloride [air, unspecified]: 0.00332174 kg; lognormal variance with pedigree 0.049425, pedigree (2,5,2,2,2)
  (same comment as for Ethane, 1,2-dichloro-)
- Water [air, unspecified]: 0.0042189 m3; lognormal variance with pedigree 0.0894, pedigree (2,5,2,4,4)
  Calculated based on literature data published by the GENDORF Chemical Park. The factory produced an average of 2462760 tonnes of chemical substances (including intermediates) per year in the years 2015-2019. To determine the emissions of water to air, the difference of all water inputs (from river, well, tap water and cooling) and outputs (wastewater, emissions to water) was calculated. The average ouput of water to air in the years 2015-2019 was 3620444 m3 per year. This equals 0.00147 m3/kg chemical produced. For more information on the other water exchanges please consult the respective exchange comment.
  Since this process comprises 2 reactions to produce the final product, the default value was scaled up. To produce 1 kg of output, 1.87 kg of intermediate products are necessary. The value was therefore scaled up with the factor 2.87.
  References:
  Chemiepark GENDORF, Umwelterklärung 2016, https://www.gendorf.de/Nachbarn/Umweltschutz/Industrie%20und%20Nachhaltigkeit
  Chemiepark GENDORF, Umwelterklärung 2017, https://www.gendorf.de/Nachbarn/Umweltschutz/Industrie%20und%20Nachhaltigkeit
  Chemiepark GENDORF, Umwelterklärung 2020, https://www.gendorf.de/Nachbarn/Umweltschutz/Industrie%20und%20Nachhaltigkeit
- BOD5, Biological Oxygen Demand [water, unspecified]: 0.00968073 kg; lognormal variance with pedigree 0.049425, pedigree (2,5,2,2,2)
  Calculated value. The BOD, COD, TOC and BOD5 are calculated based on the amount and type of emissions released to water in the same activity.
- COD, Chemical Oxygen Demand [water, unspecified]: 0.00968073 kg; lognormal variance with pedigree 0.049425, pedigree (2,5,2,2,2)
  (same comment as for BOD5, Biological Oxygen Demand)
- DOC, Dissolved Organic Carbon [water, unspecified]: 0.00282085 kg; lognormal variance with pedigree 0.049425, pedigree (2,5,2,2,2)
  (same comment as for BOD5, Biological Oxygen Demand)
- TOC, Total Organic Carbon [water, unspecified]: 0.00282085 kg; lognormal variance with pedigree 0.049425, pedigree (2,5,2,2,2)
  (same comment as for BOD5, Biological Oxygen Demand)
- Water [water, unspecified]: 0.0431648 m3; lognormal variance with pedigree 0.0894, pedigree (2,5,2,4,4)
  Calculated based on literature data published by the GENDORF Chemical Park. The factory produced an average of 2462760 tonnes of chemical substances (including intermediates) per year in the years 2015-2019. The amount of water released back to the environment consists of the sum of the amount of process water treated in the internal WWTP that is then released back to the environment and the amount of cooling water released back to the environment. The average ouput of the internal WWTP in the years 2015-2019 was 2628800 m3 and that of cooling water released back to the environment was 34408800 m3. This gives a yearly average of 37037600 m3 emissions of water to water. This equals 0.01504 m3/kg chemical produced.
  Since this process comprises 2 reactions to produce the final product, the default value was scaled up. To produce 1 kg of output, 1.87 kg of intermediate products are necessary. The value was therefore scaled up with the factor 2.87.
  References:
  Chemiepark GENDORF, Umwelterklärung 2016, https://www.gendorf.de/Nachbarn/Umweltschutz/Industrie%20und%20Nachhaltigkeit
  Chemiepark GENDORF, Umwelterklärung 2017, https://www.gendorf.de/Nachbarn/Umweltschutz/Industrie%20und%20Nachhaltigkeit
  Chemiepark GENDORF, Umwelterklärung 2020, https://www.gendorf.de/Nachbarn/Umweltschutz/Industrie%20und%20Nachhaltigkeit

## Sampling procedure
Literature data and stoichiometric calculation. This inventory is partially based on a generic model of the production of chemicals. The data generated by this model have been improved with compound-specific data when available.
The model of the production of chemicals is using specific industry or literature data wherever possible and more generic data on chemical production processes to fill compound-specific data gaps when necessary. The basic principles of the model have been published in literature (Hischier, 2005). The model has been updated and extended with newly available data from the chemical industry.
In the model, unreacted fractions are treated in a waste treatment process, and emissions reported are after a waste treatment process that is included in the scope of this dataset. For volatile reactants, a small level of evaporation is assumed. Solvents and catalysts are mostly recycled in closed-loop systems within the scope of the dataset and reported flows are for losses from this system.
The main source of information for the values for heat, electricity, water (process and cooling), nitrogen, chemical factory is industry data from the GENDORF Chemical Park. The values are a 5-year average of data from 2015 to 2019 published by the GENDORF Chemical Park, which is based in Germany and produced an average of 2462760 tonnes of chemical substances in the years 2015-2019.

Reference(s):
Hischier, R. (2005) Establishing Life Cycle Inventories of Chemicals Based on Differing Data Availability (9 pp). The International Journal of Life Cycle Assessment, Volume 10, Issue 1, pp 59–67. 10.1065/lca2004.10.181.7
Chemiepark GENDORF, Umwelterklärung 2016, https://www.gendorf.de/Nachbarn/Umweltschutz/Industrie%20und%20Nachhaltigkeit
Chemiepark GENDORF, Umwelterklärung 2017, https://www.gendorf.de/Nachbarn/Umweltschutz/Industrie%20und%20Nachhaltigkeit
Chemiepark GENDORF, Umwelterklärung 2020, https://www.gendorf.de/Nachbarn/Umweltschutz/Industrie%20und%20Nachhaltigkeit
Sauter H., Zeeh B., (2009): Plant Growth Regulators, in Ullmanns Encyclopedia of Industrial Chemistry, Weinheim, Wiley-VCH.
Unger T., (1996). Pesticide Synthesis Handbook, Noyes Publication.
Svara J., Weferling N., Hofmann T., (2011). Phosphorus Compounds, Organic, Ullmanns Encyclopedia of Industrial Chemistry, Weinheim, Wiley-VCH.
