# flax husks to generic market for energy feed

Dataset: EcoSpold 2, unit process
Geography: RoW
Time period: 2016-01-01 to 2022-12-31
Technology level: current
Classification: ISIC rev.4 ecoinvent: 1080:Manufacture of prepared animal feeds
Scenario: Business-as-Usual
System model: Substitution, consequential, long-term
Generated by: Avraam Symeonidis
Database: ecoinvent
isCopyrightProtected: true

## General comment
This is a linking (transfering) activity which links flax husks, to the generic market for energy feed. Flax husks are a by-product of the flax fibre production.

## Included activities start
The activity starts with the reception of flax husks.

## Included activities end
The activity models the part of flax husks which contributes to the generic market for energy feed, resulting in energy and protein outputs.

## Reference product
- flax husks: 1 kg; name falx_husks_input; By-product classification allocatable product; CPC 01919: Forage products, n.e.c.
  production volume 1 kg
  property carbon content, fossil 0; name flax_husks_input_C_content_fossil
    Carbon content fossil is considered zero in all agricultural products and by-products.
  property carbon content, non-fossil 0.475; name flax_husks_input_C_content_non_fossil
    Biogenic carbon content on a dry mass basis (47.5% DM) derived from FAOSTAT.
    Reference: http://www.fao.org/forestry/17111/en"
  property dry mass 0.907 kg; name flax_husks_input_DM
  property energy content 19.5 MJ; name flax_husks_input_gross_E_feed_per_kg_DM
    Gross energy content (19.5 MJ/kg DM) for flax straw and flax crop by-products. Reference: Feedipedia - Animal Feed Resources Information System. Accessed online at: https://www.feedipedia.org/content/about-feedipedia on 23/03/2018.
  property protein content 0.053; name flax_husks_input_protein_feed_per_kg_DM
    Crude protein content (5.3 % DM) for flax straw and flax crop by-products. Reference: Feedipedia - Animal Feed Resources Information System. Accessed online at: https://www.feedipedia.org/content/about-feedipedia on 23/03/2018.
  property water content 0.102536; name flax_husks_input_water_content
  property water in wet mass 0.093 kg; name flax_husks_input_WWM
  properties: carbon allocation 0.430825 kg, carbon content 0.475, price 0 EUR2005, wet mass 1 kg

## Inputs from technosphere
- energy feed, gross: 0.811225, 16.8753 MJ (2 suppliers, which the file names only by identifier); sum of these 17.6865 MJ; = flax_husks_input_gross_E_feed_per_kg_DM* falx_husks_input*flax_husks_input_DM
  Calculated based on literature value for "hominy feed" (Feedipedia, 2015), which reports a crude protein content of 15.2% of dry matter; while gross energy content equates to 18.7 MJ/kg dry matter of fed. Dry matter content equates 89.3% of fed. Reference(s): Feedipedia (2015) Hominy Feed, Animal Feed Resources Information System, Available at: https://www.feedipedia.org/node/12290 (Accessed November 2017).
  production volume
    Calculated based on the production volume of flax fibre. According to data collected, 3.0625 kg of flax husks are generated per kg of flax fibre produced. Given the production volume of flax fibres ii a global scale (300000000 kg) production volume of energy feed driven to the generic market for energy feed is calculated to be 28780920000 MJ.
  properties: dry mass 1 kg, price 0.0108 EUR2005, wet mass 1 kg
- protein feed, 100% crude: 0.048071 kg; = flax_husks_input_protein_feed_per_kg_DM* falx_husks_input*flax_husks_input_DM; lognormal variance with pedigree 0.0093, pedigree (4,3,1,3,1)
  (same comment as for energy feed, gross)
  production volume
    Calculated based on the production volume of flax fibre. According to data collected, 3.0625 kg of flax husks are generated per kg of flax fibre produced. Given the production volume of flax fibres in a global scale (300000000 kg) the production volume of protein feed driven to the generic market for energy feed is calculated to be 95936400 kg.
  properties: carbon content, non-fossil 0.53, dry mass 1 kg, price 0.424 EUR2005, wet mass 1 kg
