# heat and power co-generation, diesel, 200kW electrical, SCR-NOx reduction

Dataset: EcoSpold 2, unit process
Geography: RoW
Time period: 2000-01-01 to 2022-12-31
Technology level: current
Classification: EcoSpold01Categories: oil/cogeneration
Classification: ISIC rev.4 ecoinvent: 3530:Steam and air conditioning supply
Synonyms: Selective Catalytic Reduction; SCR
Tags: with true value; ConvertedDataset
Scenario: Business-as-Usual
System model: Substitution, consequential, long-term
Generated by: [System]
Published in: Heck, T. 2007
Database: ecoinvent
isCopyrightProtected: true

## General comment
The multioutput-process 'diesel, burned in cogen 200kWe diesel SCR, allocation exergy' delivers the coproducts 'heat, at cogen 200kWe diesel SCR, allocation exergy' and 'electricity, at cogen 200kWe diesel SCR, allocation exergy'. The exergy allocation is the allocation scheme suggested to be used within ecoinvent (e.g. in electricity mixes).
[This dataset was already contained in the ecoinvent database version 2. It was not individually updated during the transfer to ecoinvent version 3. Life Cycle Impact Assessment results may still have changed, as they are affected by changes in the supply chain, i.e. in other datasets. This dataset was generated following the ecoinvent quality guidelines for version 2. It may have been subject to central changes described in the ecoinvent version 3 change report (http://www.ecoinvent.org/database/ecoinvent-version-3/reports-of-changes/), and the results of the central updates were reviewed extensively. The changes added e.g. consistent water flows and other information throughout the database. The documentation of this dataset can be found in the ecoinvent reports of version 2, which are still available via the ecoinvent website. The change report linked above covers all central changes that were made during the conversion process.]

## Included activities end
The module includes fuel input, infrastructure, emissions to air, and substances needed for operation.

## Geography
Emissions and efficiencies adjusted to Swiss emission regulation (LRV, Luftreinhalteverordnung) valid in year 2000.

## Technology
Average technology available on market.

## Reference product
- heat, district or industrial, other than natural gas: 1 MJ; name heat; By-product classification allocatable product; CPC 17300: Steam and hot water
  EcoSpold01Location=CH
  production volume 0 MJ
    Calculated value.
  property Corresponding fuel use 2.32912 MJ; name fuel_use; = 0.0544186046511628*42.8/1
    Lower heating value of the fuel input related to the heat/electricity output
  property exergy 0.163854 MJ; name exergy
    allocation factor for electricity (=1) vs. heat, where heat is calculated as the termodynamic mean temperature Tm = (Tfeed-Treturn)/ln(Tfeed/Treturn), relative to the application temperature (Tu, typically = 293 K), i.e. (Tm-Tu)/Tm
  property price 0.0106 EUR2005
    Average European district heat price from Ecoheatcool and Euroheat 2005-2006, Ecoheat Work package 1: The European heat market. Final report. 10.6 EUR/GJ i s the price of district heat. http://www.solarthermalworld.org/files/Ecoheatcool%20WP1%20Web.pdf?download
  property true value relation 0.163854; name true_value_relation
    property to calculate "true value" from
  properties: carbon allocation 0 kg, carbon content 0, heating value, net 1 MJ

## Inputs from technosphere
- diesel: 9.85708e-5, 0.00413816, 0.000289861, 0.00861082, 0.0408622, 0.00041896 kg (6 suppliers, which the file names only by identifier); sum of these 0.0544186 kg; lognormal variance with pedigree 0.042, pedigree (1,1,5,5,1)
  EcoSpold01Location=CH
  properties: carbon content, fossil 0.865, dry mass 1 kg, heating value, net 42.8 MJ, wet mass 1 kg
  note on carbon content, fossil: C-content of diesel is 86.5% (ecoinvent v2.2 report 6_IV, Tab 3.14)
- electricity, high voltage: -0.000115659, -0.000184727, -0.000280838, -0.000618078, -0.0220947, -0.000666594, -0.000403232, -0.000375015, -0.000816374, -1.37504e-5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 kWh (30 suppliers, which the file names only by identifier); sum of these -0.251163 kWh
  EcoSpold01Location=CH
  production volume
    Dummy value/rough assumption. There exist two local datasets for Brazil and Switzerland, whereas the BR dataset only contains a dummy production volume value of 0. The GLO production volume is the same as the Swiss one.
  properties: exergy 3.6 MJ, price 0.0977 EUR2005
  note on exergy: allocation factor for electricity (=1) vs. heat, where heat is calculated as the termodynamic mean temperature Tm = (Tfeed-Treturn)/ln(Tfeed/Treturn), relative to the application temperature (Tu, typically = 293 K), i.e. (Tm-Tu)/Tm
- heat and power co-generation unit, 200kW electrical, diesel SCR, common components for heat+electricity: 1.26047e-8 unit; lognormal variance with pedigree 0.042, pedigree (1,1,5,5,1)
  EcoSpold01Location=RER
- heat and power co-generation unit, 200kW electrical, diesel SCR, components for electricity only: 1.26047e-8 unit; lognormal variance with pedigree 0.042, pedigree (1,1,5,5,1)
  EcoSpold01Location=RER
- heat and power co-generation unit, 200kW electrical, diesel SCR, components for heat only: 1.26047e-8 unit; lognormal variance with pedigree 0.042, pedigree (1,1,5,5,1)
  EcoSpold01Location=RER
- lubricating oil: 0.000155814 kg; lognormal variance with pedigree 0.052, pedigree (1,1,5,5,1)
  vender information
  EcoSpold01Location=RER
  properties: carbon content, fossil 0.75, dry mass 1 kg, heating value, net 40.2 MJ, wet mass 1 kg
  note on carbon content, fossil: Lubricating oil is produced from diesel. C-content/dry mass of fats and oils considered 75%, from: ecoinvent v2.2 report, n 15a, pg 40
  note on heating value, net: Literature value, Source: IPCC 2006, 2006 IPCC Guidelines for National Greenhouse Gas Inventories, Prepared by the National Greenhouse Gas Inventories Programme, Eggleston H.S., Buendia L., Miwa K., Ngara T. and Tanabe K. (eds). Published: IGES, Japan
- urea: 0.00025471, 0.00201397, 0.00171979 kg (3 suppliers, which the file names only by identifier); sum of these 0.00398846 kg; lognormal variance with pedigree 0.072, pedigree (1,1,5,5,1)
  The exchange has been updated from 'urea, as N' into 'urea' and therefore its amount has been scaled (multiplied) from 0.0019 kg by 2.1438 kg of 'urea' per kg of 'urea, as N'. Original comment of the exchange is: different references; uncertainty of urea needs from variation of NOx emissions before SCR and NH3 losses
  EcoSpold01Location=RER
  properties: carbon content, fossil 0.2, dry mass 1 kg, wet mass 1 kg
- waste mineral oil: -4.30622e-5, -0.000112752 kg (2 suppliers, which the file names only by identifier); sum of these -0.000155814 kg; lognormal variance with pedigree 0.122, pedigree (1,1,1,5,1)
  rough estimate
  EcoSpold01Location=CH
  production volume
    Calculated from the production volume of heat, district or industrial, other than natural gas in proportion to the respective output amounts.
  properties: carbon content, fossil 0.864444, dry mass 0.9 kg, heating value, net 34.7 MJ, water content 0.111111, wet mass 1 kg
  note on carbon content, fossil: Tab A.6, ecoinvent v2.2 report 13_I. C content has been calculated after data in the tables, and then referred to 1 kg DM
  note on heating value, net: Value taken from the general comment of the treatment dataset.

## Emissions to nature
- Ammonia [air, urban air close to ground]: 2.32558e-6 kg; lognormal variance with pedigree 0.162, pedigree (1,1,5,5,1)
  estimate based on different references
- Carbon dioxide, fossil [air, urban air close to ground]: 0.171395 kg; lognormal variance with pedigree 0.042, pedigree (1,1,5,5,1)
  composition of oil
- Carbon monoxide, fossil [air, urban air close to ground]: 0.000348837 kg; lognormal variance with pedigree 0.162, pedigree (1,1,5,5,1)
  estimate based on different references
- Dinitrogen monoxide [air, urban air close to ground]: 1.16279e-5 kg; lognormal variance with pedigree 0.692, pedigree (1,1,5,5,1)
  rough estimate
- Methane, fossil [air, urban air close to ground]: 2.7907e-5 kg; lognormal variance with pedigree 0.162, pedigree (1,1,5,5,1)
  estimate based on different references
- NMVOC, non-methane volatile organic compounds [air, urban air close to ground]: 0.000116279 kg; lognormal variance with pedigree 0.162, pedigree (1,1,5,5,1)
  estimate based on different references
- Nitrogen oxides [air, urban air close to ground]: 0.000162791 kg; lognormal variance with pedigree 0.062, pedigree (1,1,5,5,1)
  estimate based on different references
- Particulate Matter, < 2.5 um [air, urban air close to ground]: 2.32558e-6 kg; lognormal variance with pedigree 0.162, pedigree (1,1,5,5,1)
  estimate based on different references
- Platinum [air, urban air close to ground]: 1.62791e-11 kg; lognormal variance with pedigree 1.372, pedigree (1,1,5,5,1)
  (Artelt et al. 2000)
- Sulfur dioxide [air, urban air close to ground]: 0.000116279 kg; lognormal variance with pedigree 0.052, pedigree (1,1,5,5,1)
  composition of oil

## Sampling procedure
Literature. Manufacturer information.

## Extrapolations
This dataset has been copied from an original dataset covering the geography CH. The uncertainty has been adjusted accordingly.

## Review by Gerald Rebitzer (obsolete) 2003-07-03
passed

## Review by Emilia Moreno Ruiz 2012-04-16
calculation of fuel use property.

## Review by Bo Weidema 2012-09-28
revised production volume
