# treatment of waste asphalt, sanitary landfill

Dataset: EcoSpold 2, unit process
Geography: RoW
Time period: 1994-01-01 to 2022-12-31
Technology level: current
Classification: ISIC rev.4 ecoinvent: 3821:Treatment and disposal of non-hazardous waste
Classification: EcoSpold01Categories: waste management/sanitary landfill
Synonyms: road tar; alphaltum; petroleum asphalt; mixture of approximately 5% bitumen and gravel
Tags: ConvertedDataset; Treatment
Scenario: Business-as-Usual
System model: Substitution, consequential, long-term
Generated by: Gabor Doka (obsolete)
Published in: Doka G. 2007
Database: ecoinvent
isCopyrightProtected: true

## General comment
Inventoried waste contains 94.7% inert material; 5.3% bitumen; .
waste composition (wet, in ppm): upper heating value 2.194 MJ/kg; lower heating value 2.087 MJ/kg; H2O 718.68; O 505600; H 5300; C 44036; S 2120; N 265; P 0.212; B n.a.; Cl n.a.; Br n.a.; F n.a.; I n.a.; Ag n.a.; As 0.0371; Ba n.a.; Cd n.a.; Co 0.02279; Cr 0.01855; Cu 0.265; Hg 0.00106; Mn n.a.; Mo 0.02968; Ni 5.3; Pb 0.053; Sb n.a.; Se 0.0106; Sn 4.717; V 13.25; Zn n.a.; Be n.a.; Sc n.a.; Sr n.a.; Ti n.a.; Tl n.a.; W n.a.; Si 441930; Fe 3.975; Ca 0.318; Al 0.371; K n.a.; Mg n.a.; Na 1.855;
Share of carbon in waste that is biogenic 0%.
Overall degradability of waste during 100 years: 0.05%.
[This dataset was already contained in the ecoinvent database version 2. It was not individually updated during the transfer to ecoinvent version 3. Life Cycle Impact Assessment results may still have changed, as they are affected by changes in the supply chain, i.e. in other datasets. This dataset was generated following the ecoinvent quality guidelines for version 2. It may have been subject to central changes described in the ecoinvent version 3 change report (http://www.ecoinvent.org/database/ecoinvent-version-3/reports-of-changes/), and the results of the central updates were reviewed extensively. The changes added e.g. consistent water flows and other information throughout the database. The documentation of this dataset can be found in the ecoinvent reports of version 2, which are still available via the ecoinvent website. The change report linked above covers all central changes that were made during the conversion process.]

## Included activities end
Waste-specific short-term emissions to air via landfill gas incineration and landfill leachate. Burdens from treatment of short-term leachate (0-100a) in wastewater treatment plant (including WWTP sludge disposal in municipal incinerator). Long-term emissions from landfill to groundwater (after base lining failure).

## Geography
Technology encountered in Switzerland in 2000. Landfill includes base seal, leachate collection system, treatment of leachate in municipal wastewater treatment plant.

## Technology
Swiss municipal sanitary landfill for biogenic or untreated municipal waste ('reactive organic landfill'). Landfill gas and leachate collection system. Recultivation and monitoring for 150 years after closure.

## Reference product
- waste asphalt: -1 kg; By-product classification Waste; CPC 39: Wastes or scraps
  EcoSpold01Location=CH
  production volume 3.96633 kg
    This is a placeholder value that does not reflect real-world production volumes. This dataset does not currently require a real-world production volume to work in the database framework, and no actual data were collected yet. This has no negative effect on the results of the ecoinvent database.
  property carbon content, fossil 0.0440796
    The waste contains 94.7% inert material (see Tab A.5 for details) 5.3% bitumen (see Tab A.6 for details), ecoinvent v2.2 report 13_I
  property heating value, net 0 MJ
    Non combustible products are assumed to have an LHV equal to zero (0).
  property price 0 EUR2005
    Waste products are assigned a price of zero as they are assumed to require further treatment.
  properties: carbon allocation 0.0440356 kg, carbon content 0.0440796, carbon content, non-fossil 0, dry mass 0.999 kg, water content 0.001001, water in wet mass 0.001 kg, wet mass 1 kg

## Inputs from technosphere
- aluminium sulfate, powder: 1.52e-10 kg; lognormal variance with pedigree 2.67, pedigree (5,5,5,5,5)
  EcoSpold01Location=RER
  burden from wastewater treatment of the short-term leachate (0-100a). Uncertainty calculated from unertainty of the waste composition of this waste, uncertainty in waste decomposition and short-term leaching in sanitary landfill
  Uncertainty: . Uncertainty calculated from unertainty of the waste composition of this waste, uncertainty in waste decomposition and short-term leaching in sanitary landfill
  properties: dry mass 1 kg, wet mass 1 kg
- ammonia, anhydrous, liquid: 2.61279e-10, 5.31597e-11, 5.07197e-10, 1.95371e-9, 2.37643e-10, 1.5737e-10, 5.62195e-9, 5.17687e-10 kg (8 suppliers, which the file names only by identifier); sum of these 9.31e-9 kg; lognormal variance with pedigree 0.902, pedigree (1,1,5,5,1)
  burden from incineration of sludge from wastewater treatment of the short-term leachate (0-100a). uncertainty is calculated from uncertainties in waste composition and transfer coefficients in incinerator and uncertainty of waste decomposition and short-term leaching in sanitary landfill
  EcoSpold01Location=CH
  properties: dry mass 1 kg, wet mass 1 kg
- cement, unspecified: 5.4818e-11, 8.99537e-11, 3.41622e-10, 4.24804e-12, 8.44297e-12, 1.29078e-11, 3.44031e-9, 1.07231e-11, 2.0697e-10 kg (9 suppliers, which the file names only by identifier); sum of these 4.17e-9 kg; lognormal variance with pedigree 0.842, pedigree (1,1,5,5,1)
  (same comment as for ammonia, anhydrous, liquid)
  properties: dry mass 1 kg, wet mass 1 kg
- chemical, inorganic: 1.01e-12 kg; lognormal variance with pedigree 0.642, pedigree (1,1,5,5,1)
  EcoSpold01Location=GLO
  burden from incineration of sludge from wastewater treatment of the short-term leachate (0-100a). uncertainty is calculated from uncertainties in waste composition and transfer coefficients in incinerator and uncertainty of waste decomposition and short-term leaching in sanitary landfill
  properties: carbon content, fossil 0.003, dry mass 1 kg, wet mass 1 kg
  note on carbon content, fossil: This dataset is an unweighted average of 20 inorganic substances (listed in Tab 88.1, ecoinvent v2.2 report 8, part II), being part of the top100 chemicals included in this database. The C-content has also been calculated as an unweighted average of the C content of the substances composing this dataset.
- chemical, organic: 1.55e-12 kg; lognormal variance with pedigree 2.692, pedigree (1,1,5,5,1)
  burden from incineration of sludge from wastewater treatment of the short-term leachate (0-100a). uncertainty is calculated from uncertainties in waste composition and transfer coefficients in incinerator and uncertainty of waste decomposition and short-term leaching in sanitary landfill
  EcoSpold01Location=GLO
  properties: carbon content, fossil 0.628, dry mass 1 kg, heating value, net 19.03 MJ, wet mass 1 kg
  note on carbon content, fossil: This dataset is an unweighted average of 20 organic substances (listed in Tab 88.1, ecoinvent v2.2 report 8, part II), being part of the top100 chemicals included in this database. The C-content has also been calculated as an unweighted average of the C content of the substances composing this dataset.
- chromium oxide, flakes: 5.44e-12 kg; lognormal variance with pedigree 1.29, pedigree (5,5,5,5,5)
  burden from incineration of sludge from wastewater treatment of the short-term leachate (0-100a). Proxy for vanadium pentoxide V2O5 in SCR catalyst, uncertainty calculated from uncertainty in average DeNOx input, uncertainty in the share of thermal NOx, uncertainty of nitrogen content in average municipal waste and the unertainty in nitrogen content in *this* waste and uncertainty of waste decomposition and short-term leaching in sanitary landfill
  EcoSpold01Location=RER
  Uncertainty: . Proxy for vanadium pentoxide V2O5 in SCR catalyst, uncertainty calculated from uncertainty in average DeNOx input, uncertainty in the share of thermal NOx, uncertainty of nitrogen content in average municipal waste and the unertainty in nitrogen content in *this* waste and uncertainty of waste decomposition and short-term leaching in sanitary landfill
  properties: dry mass 1 kg, wet mass 1 kg
- electricity, high voltage: 9.3528e-8, 3.45575e-9, 3.45515e-9, 7.66936e-7, 1.72888e-8, 6.46032e-8, 9.67783e-8, 4.39551e-8 kWh (8 suppliers, which the file names only by identifier); sum of these 1.09e-6 kWh; lognormal variance with pedigree 1.382, pedigree (1,1,5,5,1)
  EcoSpold01Location=CH
  burden from incineration of sludge from wastewater treatment of the short-term leachate (0-100a). uncertainty is calculated from uncertainties in waste composition and transfer coefficients in incinerator and uncertainty of waste decomposition and short-term leaching in sanitary landfill
- electricity, low voltage: 1.23409e-6, 7.42716e-5, 8.28316e-6, 1.03144e-5, 8.89717e-6, 3.10225e-7, 4.17252e-6, 1.51683e-6 kWh (8 suppliers, which the file names only by identifier); sum of these 0.000109 kWh; lognormal variance with pedigree 0.34, pedigree (5,5,5,5,5)
  EcoSpold01Location=CH
  burden from wastewater treatment of the short-term leachate (0-100a). Uncertainty calculated from unertainty of the waste composition of this waste, uncertainty in waste decomposition and short-term leaching in sanitary landfill
  Uncertainty: . Uncertainty calculated from unertainty of the waste composition of this waste, uncertainty in waste decomposition and short-term leaching in sanitary landfill
- heat, central or small-scale, other than natural gas: 3.2736e-5, 6.99858e-8 MJ (2 suppliers, which the file names only by identifier); sum of these 3.2806e-5 MJ; lognormal variance with pedigree 0.2106, pedigree (5,5,5,5,5)
  (same comment as for electricity, low voltage)
  properties: heating value, net 1 MJ
- heat, district or industrial, natural gas: 4.41861e-6, 1.24945e-5, 2.91201e-5 MJ (3 suppliers, which the file names only by identifier); sum of these 4.60332e-5 MJ; lognormal variance with pedigree 0.902, pedigree (1,1,5,5,1)
  EcoSpold01Location=RER
  burden from incineration of sludge from wastewater treatment of the short-term leachate (0-100a). uncertainty is calculated from uncertainties in waste composition and transfer coefficients in incinerator and uncertainty of waste decomposition and short-term leaching in sanitary landfill
  properties: heating value, net 1 MJ
- heat, district or industrial, other than natural gas: 5.27967e-6, 9.21925e-9, 1.08111e-6 MJ (3 suppliers, which the file names only by identifier); sum of these 6.37e-6 MJ; lognormal variance with pedigree 0.962, pedigree (1,1,5,5,1)
  (same comment as for electricity, high voltage)
  properties: heating value, net 1 MJ
- hydrochloric acid, without water, in 30% solution state: 6.03e-13 kg; lognormal variance with pedigree 0.642, pedigree (1,1,5,5,1)
  (same comment as for heat, district or industrial, natural gas)
  properties: dry mass 1 kg, heating value, net 3.32 MJ, wet mass 1 kg
- iron (III) chloride, without water, in 40% solution state: 8.13e-10 kg; lognormal variance with pedigree 2.482, pedigree (1,1,5,5,1)
  (same comment as for ammonia, anhydrous, liquid)
  properties: dry mass 1 kg, wet mass 1 kg
- iron sulfate: 5.62e-10 kg; lognormal variance with pedigree 2.67, pedigree (5,5,5,5,5)
  (same comment as for aluminium sulfate, powder)
  properties: dry mass 1 kg, wet mass 1 kg
- municipal waste incineration facility: 1.9e-15 unit; lognormal variance with pedigree 0.962, pedigree (1,1,5,5,1)
  Burden from incineration of sludge from wastewater treatment of the short-term leachate (0-100a).
  EcoSpold01Location=CH
- process-specific burdens, municipal waste incineration: 2.14702e-6, 5.44298e-6 kg (2 suppliers, which the file names only by identifier); sum of these 7.59e-6 kg; lognormal variance with pedigree 0.962, pedigree (1,1,5,5,1)
  (same comment as for municipal waste incineration facility)
- process-specific burdens, residual material landfill: 2.94189e-9, 7.45811e-9 kg (2 suppliers, which the file names only by identifier); sum of these 1.04e-8 kg; lognormal variance with pedigree 0.832, pedigree (1,1,5,5,1)
  (same comment as for ammonia, anhydrous, liquid)
- process-specific burdens, sanitary landfill: 1 kg; lognormal variance with pedigree 0.042, pedigree (1,1,5,5,1)
  demands per kilogram waste. uncertainty is heeded in the module
  EcoSpold01Location=CH
- process-specific burdens, slag landfill: 1.15413e-8, 2.92587e-8 kg (2 suppliers, which the file names only by identifier); sum of these 4.08e-8 kg; lognormal variance with pedigree 0.712, pedigree (1,1,5,5,1)
  (same comment as for ammonia, anhydrous, liquid)
- quicklime, milled, packed: 8.39e-11 kg; lognormal variance with pedigree 0.822, pedigree (1,1,5,5,1)
  (same comment as for ammonia, anhydrous, liquid)
  properties: dry mass 0.99 kg, water content 0.010101, wet mass 1 kg
- residual material landfill: 2.17e-17 unit; lognormal variance with pedigree 0.832, pedigree (1,1,5,5,1)
  (same comment as for electricity, high voltage)
- sanitary landfill facility: 5.56e-10 unit; lognormal variance with pedigree 0.042, pedigree (1,1,5,5,1)
  demands per kilogram waste. uncertainty is heeded in the module
  EcoSpold01Location=CH
- sewer grid, 5E9l/year, 110 km: 5.45e-10 km; lognormal variance with pedigree 0.2106, pedigree (5,5,5,5,5)
  burden from wastewater treatment of the short-term leachate (0-100a). Uncertainty calculated from unertainty of the waste composition of this waste, uncertainty in waste decomposition and short-term leaching in sanitary landfill
  EcoSpold01Location=CH
  Uncertainty: . Uncertainty calculated from unertainty of the waste composition of this waste, uncertainty in waste decomposition and short-term leaching in sanitary landfill
- slag landfill: 7.25e-17 unit; lognormal variance with pedigree 0.712, pedigree (1,1,5,5,1)
  (same comment as for electricity, high voltage)
- sodium hydroxide, without water, in 50% solution state: 4.63e-10 kg; lognormal variance with pedigree 0.812, pedigree (1,1,5,5,1)
  (same comment as for heat, district or industrial, natural gas)
  properties: dry mass 1 kg, heating value, net 3.03 MJ, wet mass 1 kg
- titanium dioxide: 2.66e-10 kg; lognormal variance with pedigree 1.172, pedigree (1,1,5,5,1)
  burden from incineration of sludge from wastewater treatment of the short-term leachate (0-100a). uncertainty is calculated from uncertainties in waste composition and transfer coefficients in incinerator and uncertainty of waste decomposition and short-term leaching in sanitary landfill
  EcoSpold01Location=RER
  properties: dry mass 1 kg, wet mass 1 kg
- waste cement, hydrated: -2.94189e-9, -7.45811e-9 kg (2 suppliers, which the file names only by identifier); sum of these -1.04e-8 kg; lognormal variance with pedigree 0.802, pedigree (1,1,1,5,1)
  (same comment as for ammonia, anhydrous, liquid)
  production volume
    Calculated from the production volume of waste asphalt, 0.1% water in proportion to the respective output amounts.
  properties: dry mass 1 kg, wet mass 1 kg
- waste graphical paper: -2.59179e-7, -4.09465e-6, -9.36524e-7, -9.13189e-8, -1.69726e-6, -1.69041e-7, -2.26629e-8, -3.15294e-5 kg (8 suppliers, which the file names only by identifier); sum of these -3.88e-5 kg; lognormal variance with pedigree 0.2106, pedigree (5,5,5,5,5)
  (same comment as for sewer grid, 5E9l/year, 110 km)
  production volume
    (same comment as for waste cement, hydrated)
  properties: carbon content, non-fossil 0.454955, dry mass 0.888 kg, heating value, net 14.12 MJ, water content 0.126126, wet mass 1 kg
  note on heating value, net: Value taken from the general comment of the treatment dataset.
- waste plastic, mixture: -2.18105e-8, -4.31618e-6, -1.19116e-7, -1.13112e-7, -2.88391e-7, -3.67759e-6, -4.81214e-8, -3.02157e-5 kg (8 suppliers, which the file names only by identifier); sum of these -3.88e-5 kg; lognormal variance with pedigree 0.2106, pedigree (5,5,5,5,5)
  (same comment as for sewer grid, 5E9l/year, 110 km)
  production volume
    (same comment as for waste cement, hydrated)
  properties: carbon content, fossil 0.747344, dry mass 0.847 kg, heating value, net 30.79 MJ, water content 0.180638, wet mass 1 kg
  note on carbon content, fossil: C content in 1 kg DM was calculated using data in Tab A.2, ecoinvent v2.2 report 13_I
- wastewater treatment facility, capacity 5E9l/year: 1.42e-11 unit; lognormal variance with pedigree 0.2106, pedigree (5,5,5,5,5)
  (same comment as for sewer grid, 5E9l/year, 110 km)

## Emissions to nature
- Aluminium III [air, non-urban air or from high stacks]: 4.64e-14 kg; lognormal variance with pedigree 3.562, pedigree (1,1,5,5,1)
  burden from direct release or incineration of landfill biogas. Uncertainty calculated from unertainty of the waste composition of this waste, uncertainty in waste decomposition and short-term leaching in sanitary landfill
- Aluminium III [air, urban air close to ground]: 3.1e-13 kg; lognormal variance with pedigree 2.302, pedigree (1,1,5,5,1)
  Emissions from short-term leachate treatment and incineration of resulting sludge. Uncertainty calculated depending on waste input and uncertainty of transfer coefficents in landfill, wastewater treatment and incineration model.
- Ammonia [air, urban air close to ground]: 5.91e-9 kg; lognormal variance with pedigree 0.812, pedigree (1,1,5,5,1)
  (same comment as for Aluminium III)
- Arsenic ion [air, non-urban air or from high stacks]: 9.34e-13 kg; lognormal variance with pedigree 3.102, pedigree (1,1,5,5,1)
  (same comment as for Aluminium III)
- Arsenic ion [air, urban air close to ground]: 1.88e-14 kg; lognormal variance with pedigree 2.582, pedigree (1,1,5,5,1)
  (same comment as for Aluminium III)
- Calcium [air, non-urban air or from high stacks]: 1.04e-13 kg; lognormal variance with pedigree 3.462, pedigree (1,1,5,5,1)
  (same comment as for Aluminium III)
- Calcium [air, urban air close to ground]: 6.77e-14 kg; lognormal variance with pedigree 2.412, pedigree (1,1,5,5,1)
  (same comment as for Aluminium III)
- Carbon dioxide, fossil [air, non-urban air or from high stacks]: 0.0011 kg; lognormal variance with pedigree 0.612, pedigree (1,1,5,5,1)
  (same comment as for Aluminium III)
- Carbon dioxide, fossil [air, urban air close to ground]: 3.68e-5 kg; lognormal variance with pedigree 1.062, pedigree (1,1,5,5,1)
  (same comment as for Aluminium III)
- Carbon monoxide, fossil [air, non-urban air or from high stacks]: 6.25e-8 kg; lognormal variance with pedigree 1.262, pedigree (1,1,5,5,1)
  (same comment as for Aluminium III)
- Carbon monoxide, fossil [air, urban air close to ground]: 2.36e-8 kg; lognormal variance with pedigree 1.122, pedigree (1,1,5,5,1)
  (same comment as for Aluminium III)
- Chromium III [air, non-urban air or from high stacks]: 5.29e-16 kg; lognormal variance with pedigree 3.972, pedigree (1,1,5,5,1)
  (same comment as for Aluminium III)
- Chromium III [air, urban air close to ground]: 7.7e-20 kg; lognormal variance with pedigree 3.022, pedigree (1,1,5,5,1)
  (same comment as for Aluminium III)
- Cobalt II [air, non-urban air or from high stacks]: 1.83e-14 kg; lognormal variance with pedigree 3.552, pedigree (1,1,5,5,1)
  (same comment as for Aluminium III)
- Cobalt II [air, urban air close to ground]: 1.15e-18 kg; lognormal variance with pedigree 2.582, pedigree (1,1,5,5,1)
  (same comment as for Aluminium III)
- Copper ion [air, non-urban air or from high stacks]: 3.71e-15 kg; lognormal variance with pedigree 3.882, pedigree (1,1,5,5,1)
  (same comment as for Aluminium III)
- Copper ion [air, urban air close to ground]: 7.09e-17 kg; lognormal variance with pedigree 2.902, pedigree (1,1,5,5,1)
  (same comment as for Aluminium III)
- Cyanide [air, urban air close to ground]: 1.66e-10 kg; lognormal variance with pedigree 0.922, pedigree (1,1,5,5,1)
  (same comment as for Aluminium III)
- Dinitrogen monoxide [air, urban air close to ground]: 1.63e-8 kg; lognormal variance with pedigree 0.742, pedigree (1,1,5,5,1)
  (same comment as for Aluminium III)
- Iron ion [air, non-urban air or from high stacks]: 1.36e-13 kg; lognormal variance with pedigree 3.412, pedigree (1,1,5,5,1)
  (same comment as for Aluminium III)
- Iron ion [air, urban air close to ground]: 2.47e-14 kg; lognormal variance with pedigree 2.022, pedigree (1,1,5,5,1)
  (same comment as for Aluminium III)
- Lead II [air, non-urban air or from high stacks]: 1.04e-15 kg; lognormal variance with pedigree 4.022, pedigree (1,1,5,5,1)
  (same comment as for Aluminium III)
- Lead II [air, urban air close to ground]: 1.03e-16 kg; lognormal variance with pedigree 3.052, pedigree (1,1,5,5,1)
  (same comment as for Aluminium III)
- Mercury II [air, non-urban air or from high stacks]: 2.9e-13 kg; lognormal variance with pedigree 2.792, pedigree (1,1,5,5,1)
  (same comment as for Aluminium III)
- Mercury II [air, urban air close to ground]: 1.23e-18 kg; lognormal variance with pedigree 2.722, pedigree (1,1,5,5,1)
  (same comment as for Aluminium III)
- Methane, fossil [air, non-urban air or from high stacks]: 0.000169 kg; lognormal variance with pedigree 0.652, pedigree (1,1,5,5,1)
  (same comment as for Aluminium III)
- Methane, fossil [air, urban air close to ground]: 7.21e-8 kg; lognormal variance with pedigree 1.112, pedigree (1,1,5,5,1)
  (same comment as for Aluminium III)
- Molybdenum VI [air, non-urban air or from high stacks]: 7.82e-15 kg; lognormal variance with pedigree 3.692, pedigree (1,1,5,5,1)
  (same comment as for Aluminium III)
- Molybdenum VI [air, urban air close to ground]: 3.08e-14 kg; lognormal variance with pedigree 2.642, pedigree (1,1,5,5,1)
  (same comment as for Aluminium III)
- NMVOC, non-methane volatile organic compounds [air, non-urban air or from high stacks]: 1.18e-9 kg; lognormal variance with pedigree 0.652, pedigree (1,1,5,5,1)
  (same comment as for Aluminium III)
- NMVOC, non-methane volatile organic compounds [air, urban air close to ground]: 3.27e-10 kg; lognormal variance with pedigree 1.232, pedigree (1,1,5,5,1)
  (same comment as for Aluminium III)
- Nickel II [air, non-urban air or from high stacks]: 7.7e-13 kg; lognormal variance with pedigree 3.202, pedigree (1,1,5,5,1)
  (same comment as for Aluminium III)
- Nickel II [air, urban air close to ground]: 5.23e-17 kg; lognormal variance with pedigree 2.232, pedigree (1,1,5,5,1)
  (same comment as for Aluminium III)
- Nitrogen oxides [air, non-urban air or from high stacks]: 1.71e-9 kg; lognormal variance with pedigree 1.512, pedigree (1,1,5,5,1)
  (same comment as for Aluminium III)
- Nitrogen oxides [air, urban air close to ground]: 5.77e-8 kg; lognormal variance with pedigree 0.802, pedigree (1,1,5,5,1)
  (same comment as for Aluminium III)
- Particulate Matter, < 2.5 um [air, non-urban air or from high stacks]: 2.1e-8 kg; lognormal variance with pedigree 0.912, pedigree (1,1,5,5,1)
  (same comment as for Aluminium III)
- Phosphorus [air, urban air close to ground]: 7.52e-14 kg; lognormal variance with pedigree 2.572, pedigree (1,1,5,5,1)
  (same comment as for Aluminium III)
- Selenium IV [air, non-urban air or from high stacks]: 2.79e-15 kg; lognormal variance with pedigree 3.692, pedigree (1,1,5,5,1)
  (same comment as for Aluminium III)
- Selenium IV [air, urban air close to ground]: 2.77e-20 kg; lognormal variance with pedigree 2.752, pedigree (1,1,5,5,1)
  (same comment as for Aluminium III)
- Silicon [air, non-urban air or from high stacks]: 3.97e-14 kg; lognormal variance with pedigree 3.512, pedigree (1,1,5,5,1)
  (same comment as for Aluminium III)
- Silicon [air, urban air close to ground]: 3.48e-13 kg; lognormal variance with pedigree 2.632, pedigree (1,1,5,5,1)
  (same comment as for Aluminium III)
- Sodium [air, non-urban air or from high stacks]: 1.92e-11 kg; lognormal variance with pedigree 2.792, pedigree (1,1,5,5,1)
  (same comment as for Aluminium III)
- Sulfur dioxide [air, non-urban air or from high stacks]: 2.77e-6 kg; lognormal variance with pedigree 1.312, pedigree (1,1,5,5,1)
  (same comment as for Aluminium III)
- Tin ion [air, non-urban air or from high stacks]: 6.95e-14 kg; lognormal variance with pedigree 3.502, pedigree (1,1,5,5,1)
  (same comment as for Aluminium III)
- Tin ion [air, urban air close to ground]: 2.15e-13 kg; lognormal variance with pedigree 2.472, pedigree (1,1,5,5,1)
  (same comment as for Aluminium III)
- Vanadium V [air, non-urban air or from high stacks]: 3.49e-12 kg; lognormal variance with pedigree 3.002, pedigree (1,1,5,5,1)
  (same comment as for Aluminium III)
- Vanadium V [air, urban air close to ground]: 6.88e-13 kg; lognormal variance with pedigree 1.972, pedigree (1,1,5,5,1)
  (same comment as for Aluminium III)
- Aluminium III [water, ground-, long-term]: 3.71e-7 kg; lognormal variance with pedigree 1.732, pedigree (1,1,5,5,1)
  Emissions from long-term leachate (>100a) directly from MSW landfill and indirectly via incineration of treatement sludge from leachate treatement. Uncertainty calculated depending on waste input and uncertainty of long-term transfer coefficents in landfill.
- Aluminium III [water, surface water]: 1.11e-11 kg; lognormal variance with pedigree 2.482, pedigree (1,1,5,5,1)
  (same comment as for Aluminium III)
- Ammonium [water, ground-, long-term]: 0.000105 kg; lognormal variance with pedigree 0.872, pedigree (1,1,5,5,1)
  (same comment as for Aluminium III)
- Ammonium [water, surface water]: 3.2e-6 kg; lognormal variance with pedigree 0.852, pedigree (1,1,5,5,1)
  (same comment as for Aluminium III)
- Arsenic ion [water, ground-, long-term]: 3.7e-8 kg; lognormal variance with pedigree 1.962, pedigree (1,1,5,5,1)
  (same comment as for Aluminium III)
- Arsenic ion [water, surface water]: 5.87e-11 kg; lognormal variance with pedigree 2.542, pedigree (1,1,5,5,1)
  (same comment as for Aluminium III)
- BOD5, Biological Oxygen Demand [water, ground-, long-term]: 0.00289 kg; lognormal variance with pedigree 0.712, pedigree (1,1,5,5,1)
  (same comment as for Aluminium III)
- BOD5, Biological Oxygen Demand [water, surface water]: 2.55e-6 kg; lognormal variance with pedigree 1.062, pedigree (1,1,5,5,1)
  (same comment as for Aluminium III)
- COD, Chemical Oxygen Demand [water, ground-, long-term]: 0.0122 kg; lognormal variance with pedigree 0.712, pedigree (1,1,5,5,1)
  (same comment as for Aluminium III)
- COD, Chemical Oxygen Demand [water, surface water]: 8.09e-6 kg; lognormal variance with pedigree 1.062, pedigree (1,1,5,5,1)
  (same comment as for Aluminium III)
- Calcium II [water, ground-, long-term]: 3.18e-7 kg; lognormal variance with pedigree 1.752, pedigree (1,1,5,5,1)
  (same comment as for Aluminium III)
- Calcium II [water, surface water]: 3.74e-10 kg; lognormal variance with pedigree 2.382, pedigree (1,1,5,5,1)
  (same comment as for Aluminium III)
- Chloride [water, surface water]: 5.04e-10 kg; lognormal variance with pedigree 2.552, pedigree (1,1,5,5,1)
  Emissions from short-term leachate treatment. Uncertainty calculated depending on waste input and uncertainty of transfer coefficents in landfill and wastewater treatment.
- Chromium III [water, surface water]: 3.32e-15 kg; lognormal variance with pedigree 2.932, pedigree (1,1,5,5,1)
  (same comment as for Aluminium III)
- Chromium VI [water, ground-, long-term]: 8.41e-11 kg; lognormal variance with pedigree 9.252, pedigree (1,1,5,5,1)
  (same comment as for Aluminium III)
- Chromium VI [water, surface water]: 1.11e-12 kg; lognormal variance with pedigree 2.902, pedigree (1,1,5,5,1)
  (same comment as for Aluminium III)
- Cobalt II [water, ground-, long-term]: 2.27e-8 kg; lognormal variance with pedigree 1.962, pedigree (1,1,5,5,1)
  (same comment as for Aluminium III)
- Cobalt II [water, surface water]: 3.72e-11 kg; lognormal variance with pedigree 2.462, pedigree (1,1,5,5,1)
  (same comment as for Aluminium III)
- Copper ion [water, ground-, long-term]: 2.65e-7 kg; lognormal variance with pedigree 1.782, pedigree (1,1,5,5,1)
  (same comment as for Aluminium III)
- Copper ion [water, surface water]: 3.37e-12 kg; lognormal variance with pedigree 2.832, pedigree (1,1,5,5,1)
  (same comment as for Aluminium III)
- DOC, Dissolved Organic Carbon [water, ground-, long-term]: 0.0112 kg; lognormal variance with pedigree 0.712, pedigree (1,1,5,5,1)
  (same comment as for Aluminium III)
- DOC, Dissolved Organic Carbon [water, surface water]: 1.96e-6 kg; lognormal variance with pedigree 1.062, pedigree (1,1,5,5,1)
  (same comment as for Aluminium III)
- Hydrogen sulfide [water, ground-, long-term]: 0.000154 kg; lognormal variance with pedigree 0.602, pedigree (1,1,5,5,1)
  (same comment as for Aluminium III)
- Iron ion [water, ground-, long-term]: 2.79e-7 kg; lognormal variance with pedigree 3.202, pedigree (1,1,5,5,1)
  (same comment as for Aluminium III)
- Iron ion [water, surface water]: 2.77e-10 kg; lognormal variance with pedigree 2.342, pedigree (1,1,5,5,1)
  (same comment as for Aluminium III)
- Lead II [water, ground-, long-term]: 5.3e-8 kg; lognormal variance with pedigree 1.962, pedigree (1,1,5,5,1)
  (same comment as for Aluminium III)
- Lead II [water, surface water]: 3.43e-13 kg; lognormal variance with pedigree 2.992, pedigree (1,1,5,5,1)
  (same comment as for Aluminium III)
- Mercury II [water, ground-, long-term]: 1.06e-9 kg; lognormal variance with pedigree 1.962, pedigree (1,1,5,5,1)
  (same comment as for Aluminium III)
- Mercury II [water, surface water]: 2.3e-13 kg; lognormal variance with pedigree 2.662, pedigree (1,1,5,5,1)
  (same comment as for Aluminium III)
- Molybdenum VI [water, ground-, long-term]: 1.17e-8 kg; lognormal variance with pedigree 2.182, pedigree (1,1,5,5,1)
  (same comment as for Aluminium III)
- Molybdenum VI [water, surface water]: 1.85e-11 kg; lognormal variance with pedigree 2.612, pedigree (1,1,5,5,1)
  (same comment as for Aluminium III)
- Nickel II [water, ground-, long-term]: 5.3e-6 kg; lognormal variance with pedigree 1.392, pedigree (1,1,5,5,1)
  (same comment as for Aluminium III)
- Nickel II [water, surface water]: 1.87e-9 kg; lognormal variance with pedigree 2.112, pedigree (1,1,5,5,1)
  (same comment as for Aluminium III)
- Nitrate [water, ground-, long-term]: 1.11e-5 kg; lognormal variance with pedigree 0.872, pedigree (1,1,5,5,1)
  (same comment as for Aluminium III)
- Nitrate [water, surface water]: 1.17e-5 kg; lognormal variance with pedigree 0.772, pedigree (1,1,5,5,1)
  (same comment as for Aluminium III)
- Nitrite [water, ground-, long-term]: 5.73e-6 kg; lognormal variance with pedigree 0.872, pedigree (1,1,5,5,1)
  (same comment as for Aluminium III)
- Nitrite [water, surface water]: 6.73e-8 kg; lognormal variance with pedigree 1.142, pedigree (1,1,5,5,1)
  (same comment as for Aluminium III)
- Nitrogen [water, surface water]: 8.69e-8 kg; lognormal variance with pedigree 0.782, pedigree (1,1,5,5,1)
  (same comment as for Aluminium III)
- Nitrogen, organic bound [water, ground-, long-term]: 0.000172 kg; lognormal variance with pedigree 0.872, pedigree (1,1,5,5,1)
  (same comment as for Aluminium III)
- Phosphate [water, ground-, long-term]: 4.4e-9 kg; lognormal variance with pedigree 8.052, pedigree (1,1,5,5,1)
  (same comment as for Aluminium III)
- Phosphate [water, surface water]: 1.28e-10 kg; lognormal variance with pedigree 2.542, pedigree (1,1,5,5,1)
  (same comment as for Aluminium III)
- Selenium IV [water, ground-, long-term]: 2.99e-9 kg; lognormal variance with pedigree 2.362, pedigree (1,1,5,5,1)
  (same comment as for Aluminium III)
- Selenium IV [water, surface water]: 7.47e-12 kg; lognormal variance with pedigree 2.612, pedigree (1,1,5,5,1)
  (same comment as for Aluminium III)
- Silicon [water, ground-, long-term]: 0.00846 kg; lognormal variance with pedigree 3.972, pedigree (1,1,5,5,1)
  (same comment as for Aluminium III)
- Silicon [water, surface water]: 9.57e-12 kg; lognormal variance with pedigree 2.622, pedigree (1,1,5,5,1)
  (same comment as for Aluminium III)
- Sodium I [water, ground-, long-term]: 1.78e-6 kg; lognormal variance with pedigree 1.532, pedigree (1,1,5,5,1)
  (same comment as for Aluminium III)
- Sodium I [water, surface water]: 7.68e-8 kg; lognormal variance with pedigree 1.732, pedigree (1,1,5,5,1)
  (same comment as for Chloride)
- Sulfate [water, ground-, long-term]: 0.0059 kg; lognormal variance with pedigree 0.602, pedigree (1,1,5,5,1)
  (same comment as for Aluminium III)
- Sulfate [water, surface water]: 2.41e-5 kg; lognormal variance with pedigree 1.092, pedigree (1,1,5,5,1)
  (same comment as for Chloride)
- TOC, Total Organic Carbon [water, ground-, long-term]: 0.0112 kg; lognormal variance with pedigree 0.712, pedigree (1,1,5,5,1)
  (same comment as for Aluminium III)
- TOC, Total Organic Carbon [water, surface water]: 2.05e-6 kg; lognormal variance with pedigree 1.062, pedigree (1,1,5,5,1)
  (same comment as for Aluminium III)
- Tin ion [water, ground-, long-term]: 4.72e-6 kg; lognormal variance with pedigree 1.412, pedigree (1,1,5,5,1)
  (same comment as for Aluminium III)
- Tin ion [water, surface water]: 1.16e-10 kg; lognormal variance with pedigree 2.442, pedigree (1,1,5,5,1)
  (same comment as for Aluminium III)
- Vanadium V [water, ground-, long-term]: 3.86e-6 kg; lognormal variance with pedigree 1.652, pedigree (1,1,5,5,1)
  (same comment as for Aluminium III)
- Vanadium V [water, surface water]: 7.1e-9 kg; lognormal variance with pedigree 1.922, pedigree (1,1,5,5,1)
  (same comment as for Aluminium III)

## Sampling procedure
Landfill model based on observed leachate concentrations in literature. Extrapolated to 60'000 years heeding chemical characteristics. Initial waste composition from various literature sources.

## Extrapolations
This dataset has been copied from an original dataset covering the geography CH. The uncertainty has been adjusted accordingly.

## Review by Niels Jungbluth 2003-07-21
Passed. Calculation for standard deviation 95 of, i.e., infrastructure,
land occupation, transport services or other services can differ from
standard Pedigree approach used in this project and figures obtained by
this procedure.
