# heat and power co-generation, natural gas, 1MW electrical, lean burn

Dataset: EcoSpold 2, unit process
Geography: Europe without Switzerland
Time period: 2000-01-01 to 2022-12-31
Technology level: current
Classification: ISIC rev.4 ecoinvent: 3530:Steam and air conditioning supply
Classification: EcoSpold01Categories: natural gas/cogeneration
Tags: ConvertedDataset; with true value
Scenario: Business-as-Usual
System model: Substitution, consequential, long-term
Generated by: [System]
Published in: Heck, T. 2007
Database: ecoinvent
isCopyrightProtected: true

## General comment
The multioutput-process 'natural gas, burned in cogen 1MWe lean burn, allocation exergy' delivers the coproducts 'heat, at cogen 1MWe lean burn, allocation exergy' and 'electricity, at cogen 1MWe lean burn, allocation exergy'. The exergy allocation is the allocation scheme suggested to be used within ecoinvent (e.g. in electricity mixes).
[This dataset was already contained in the ecoinvent database version 2. It was not individually updated during the transfer to ecoinvent version 3. Life Cycle Impact Assessment results may still have changed, as they are affected by changes in the supply chain, i.e. in other datasets. This dataset was generated following the ecoinvent quality guidelines for version 2. It may have been subject to central changes described in the ecoinvent version 3 change report (http://www.ecoinvent.org/database/ecoinvent-version-3/reports-of-changes/), and the results of the central updates were reviewed extensively. The changes added e.g. consistent water flows and other information throughout the database. The documentation of this dataset can be found in the ecoinvent reports of version 2, which are still available via the ecoinvent website. The change report linked above covers all central changes that were made during the conversion process.]

## Included activities end
The module includes fuel input, infrastructure, emissions to air, and substances needed for operation. Module 'natural gas, high pressure, at consumer' is used; methane emissions from leakages due to distribution in low pressure network have been included (emission factor taken from Swiss module 'natural gas, low pressure, at consumer, CH').

## Geography
Emissions and efficiencies adjusted to typical European conditions; extrapolated from German and Swiss emission regulations.

## Technology
Average technology available on market.

## Parameters
- scaling factor: 2.27273 dimensionless

## Reference product
- heat, district or industrial, natural gas: 1 MJ; = 0.44 * scaling_factor; By-product classification allocatable product; CPC 17300: Steam and hot water
  Amount was scaled to 1.
  EcoSpold01Location=RER
  production volume 6.17e10 MJ
    Literature value/extrapolation.
    A relation of 1:100 between the CH and the Europe without Switzerland dataset is assumed for extrapolation of the value to the global dataset.
  property Corresponding fuel use 2.07063 MJ; name fuel_use; = 0.025641*35.532/0.44
    Lower heating value of the fuel input related to the heat/electricity output
  property exergy 0.169678 MJ; name exergy
    allocation factor for electricity (=1) vs. heat, where heat is calculated as the termodynamic mean temperature Tm = (Tfeed-Treturn)/ln(Tfeed/Treturn), relative to the application temperature (Tu, typically = 293 K), i.e. (Tm-Tu)/Tm
  property price 0.0106 EUR2005
    Average European district heat price from Ecoheatcool and Euroheat 2005-2006, Ecoheat Work package 1: The European heat market. Final report. 10.6 EUR/GJ i s the price of district heat. http://www.solarthermalworld.org/files/Ecoheatcool%20WP1%20Web.pdf?download
  property true value relation 0.169678; name true_value_relation
    property to calculate "true value" from
  properties: EcoSpold01Allocation_undefined_1 16, EcoSpold01Allocation_undefined_10 16, EcoSpold01Allocation_undefined_11 16, EcoSpold01Allocation_undefined_12 16, EcoSpold01Allocation_undefined_13 16, EcoSpold01Allocation_undefined_14 16, EcoSpold01Allocation_undefined_15 16, EcoSpold01Allocation_undefined_16 16, EcoSpold01Allocation_undefined_18 100, EcoSpold01Allocation_undefined_2 16, EcoSpold01Allocation_undefined_3 0, EcoSpold01Allocation_undefined_4 100, EcoSpold01Allocation_undefined_5 16, EcoSpold01Allocation_undefined_6 16, EcoSpold01Allocation_undefined_7 16, EcoSpold01Allocation_undefined_8 16, EcoSpold01Allocation_undefined_9 16, carbon allocation 0 kg, carbon content 0, heating value, net 1 MJ

## Inputs from technosphere
- electricity, high voltage: -0.240909 kWh; name electricity; = 0.106 * scaling_factor
  Amount was scaled to the amount of reference product.
  EcoSpold01Location=RER
  production volume
    Calculated from the production volume of heat, district or industrial, natural gas in proportion to the respective output amounts.
  property exergy 3.6 MJ; name electricity_exergy
  property true value relation 3.6; name electricity_true_value_relation
  properties: EcoSpold01Allocation_undefined_1 84, EcoSpold01Allocation_undefined_10 84, EcoSpold01Allocation_undefined_11 84, EcoSpold01Allocation_undefined_12 84, EcoSpold01Allocation_undefined_13 84, EcoSpold01Allocation_undefined_14 84, EcoSpold01Allocation_undefined_15 84, EcoSpold01Allocation_undefined_16 84, EcoSpold01Allocation_undefined_17 100, EcoSpold01Allocation_undefined_2 84, EcoSpold01Allocation_undefined_3 100, EcoSpold01Allocation_undefined_5 84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
  note on exergy: allocation factor for electricity (=1) vs. heat, where heat is calculated as the termodynamic mean temperature Tm = (Tfeed-Treturn)/ln(Tfeed/Treturn), relative to the application temperature (Tu, typically = 293 K), i.e. (Tm-Tu)/Tm
- heat and power co-generation unit, 1MW electrical, common components for heat+electricity: 2.40909e-9 unit; = 1.06E-09 * scaling_factor; lognormal variance with pedigree 0.042, pedigree (1,1,5,5,1)
  EcoSpold01Location=RER
  Amount was scaled to the amount of reference product.
- heat and power co-generation unit, 1MW electrical, components for electricity only: 2.40909e-9 unit; = 1.06E-09 * scaling_factor; lognormal variance with pedigree 0.042, pedigree (1,1,5,5,1)
  EcoSpold01Location=RER
  Amount was scaled to the amount of reference product.
- heat and power co-generation unit, 1MW electrical, components for heat only: 2.40909e-9 unit; = 1.06E-09 * scaling_factor; lognormal variance with pedigree 0.042, pedigree (1,1,5,5,1)
  EcoSpold01Location=RER
  Amount was scaled to the amount of reference product.
- lubricating oil: 6.81818e-5 kg; = 3E-05 * scaling_factor; lognormal variance with pedigree 0.052, pedigree (1,1,5,5,1)
  EcoSpold01Location=RER
  vendor information
  Amount was scaled to the amount of reference product.
  properties: carbon content, fossil 0.75, dry mass 1 kg, heating value, net 40.2 MJ, wet mass 1 kg
  note on carbon content, fossil: Lubricating oil is produced from diesel. C-content/dry mass of fats and oils considered 75%, from: ecoinvent v2.2 report, n 15a, pg 40
  note on heating value, net: Literature value, Source: IPCC 2006, 2006 IPCC Guidelines for National Greenhouse Gas Inventories, Prepared by the National Greenhouse Gas Inventories Programme, Eggleston H.S., Buendia L., Miwa K., Ngara T. and Tanabe K. (eds). Published: IGES, Japan
- natural gas, high pressure: 0.0582751 m3; = 0.0256410256410256 * scaling_factor; lognormal variance with pedigree 0.042, pedigree (1,1,5,5,1)
  EcoSpold01Location=RER
  uncertainty because of application of CH module to RER
  Amount was scaled to the amount of reference product.
  properties: carbon content, fossil 0.602381, dry mass 0.84 kg, heating value, gross 39 MJ, heating value, net 36 MJ, wet mass 0.84 kg
  note on carbon content, fossil: An average C content of 0.506 kg C/ m3 has been assumed (this average has been calculated using data in Tab 3.5, ecoinvent v2.2 report 6_V
  note on heating value, net: Literature value, Source: Christoph Meili;Niels Jungbluth;Maresa Bussa (2021) Life cycle inventories of crude oil and natural gas extraction. ESU-services Ltd. commissioned by BAFU & VSG, Schaffhausen, Switzerland, http://esu-services.ch/data/public-lci-reports/
- waste mineral oil: -6.81818e-5 kg; name waste_min_oil; = 3E-05 * scaling_factor; lognormal variance with pedigree 0.122, pedigree (1,1,1,5,1)
  EcoSpold01Location=CH
  rough estimate
  Amount was scaled to the amount of reference product.
  production volume
    (same comment as for electricity, high voltage)
  properties: carbon content, fossil 0.864444, dry mass 0.9 kg, heating value, net 34.7 MJ, water content 0.111111, wet mass 1 kg
  note on carbon content, fossil: Tab A.6, ecoinvent v2.2 report 13_I. C content has been calculated after data in the tables, and then referred to 1 kg DM
  note on heating value, net: Value taken from the general comment of the treatment dataset.

## Emissions to nature
- Carbon dioxide, fossil [air, urban air close to ground]: 0.127273 kg; = 0.056 * scaling_factor; lognormal variance with pedigree 0.042, pedigree (1,1,5,5,1)
  composition of natural gas
  Amount was scaled to the amount of reference product.
- Carbon monoxide, fossil [air, urban air close to ground]: 0.000243182 kg; = 0.000107 * scaling_factor; lognormal variance with pedigree 0.252, pedigree (1,1,5,5,1)
  estimate based on different references
  Amount was scaled to the amount of reference product.
- Dinitrogen monoxide [air, urban air close to ground]: 1.13636e-5 kg; = 5E-06 * scaling_factor; lognormal variance with pedigree 0.342, pedigree (1,1,5,5,1)
  rough estimate
  Amount was scaled to the amount of reference product.
- Methane, fossil [air, non-urban air or from high stacks]: 0.000304545 kg; = 0.000134 * scaling_factor; lognormal variance with pedigree 0.202, pedigree (1,1,5,5,1)
  losses due to distribution in low pressure network, data from module 'natural gas, low pressure, at consumer, CH'
  Amount was scaled to the amount of reference product.
- Methane, fossil [air, urban air close to ground]: 0.000181818 kg; = 8E-05 * scaling_factor; lognormal variance with pedigree 0.522, pedigree (1,1,5,5,1)
  (same comment as for Carbon monoxide, fossil)
- NMVOC, non-methane volatile organic compounds [air, urban air close to ground]: 2.27273e-5 kg; = 1E-05 * scaling_factor; lognormal variance with pedigree 1.122, pedigree (1,1,5,5,1)
  (same comment as for Carbon monoxide, fossil)
- Nitrogen oxides [air, urban air close to ground]: 0.000238636 kg; = 0.000105 * scaling_factor; lognormal variance with pedigree 0.162, pedigree (1,1,5,5,1)
  (same comment as for Carbon monoxide, fossil)
- Particulate Matter, < 2.5 um [air, urban air close to ground]: 3.40909e-7 kg; = 1.5E-07 * scaling_factor; lognormal variance with pedigree 0.162, pedigree (1,1,5,5,1)
  (same comment as for Carbon monoxide, fossil)
- Sulfur dioxide [air, urban air close to ground]: 1.25e-6 kg; = 5.5E-07 * scaling_factor; lognormal variance with pedigree 0.042, pedigree (1,1,5,5,1)
  composition of natural gas
  Amount was scaled to the amount of reference product.

## Sampling procedure
Literature. Manufacturer information.

## Extrapolations
This dataset has been copied from a dataset valid for Switzerland. Uncertainty has been adjusted accordingly.

## Review by Gerald Rebitzer (obsolete) 2004-04-15
had passed

## Review by Emilia Moreno Ruiz 2012-04-16
calculation of fuel use property.
