# heat and power co-generation, wood chips, 6667 kW

Dataset: EcoSpold 2, unit process
Geography: RoW
Time period: 2010-01-01 to 2022-12-31
Technology level: current
Classification: ISIC rev.4 ecoinvent: 3530:Steam and air conditioning supply
Tags: with true value; wood power
Scenario: Business-as-Usual
System model: Substitution, consequential, long-term
Generated by: Karin Treyer
Published in: Bauer, C. 2007
Database: ecoinvent
isCopyrightProtected: true

## General comment
This dataset represents the production of heat and electricity with wood chips in a co-generation plant with a capacity of 6667 kW (referring to fuel input) in Switzerland and was used as approximation for this dataset valid for a global average (uncertainties adjusted accordingly). The technology corresponds to the average installed in 2014 in Switzerland, which is equipped with an electrostatic precipitator for particulate matter (PM) emission reduction. It is assumed that the plant is operated mainly producing heat, i.e. following the heat demand. Heat is therefore considered as the main product and the reference product, whereas electricity is a by-product. Electricity is produced with an organic rankine cycle (ORC) steam generator.
Wood chips are burned in a boiler at a temperature of 800-1300 °C under excess air conditions and turned into carbon dioxide and water. Energy is set free in form of heat. Burning takes place with the following steps:
1. Drying
2. degradation of the wood into carbon and gases
3. degradation of the carbon into gases
4. oxidation of the gases
These phases overlap. The produced heat can be used directly or for steam production in order to generate electricity with a turbine.
Emissions vary with quality of the combustion (temperature, mixing of the combustion gases and the added fresh air, retention time of gases in the combustor), filter technologies and with the efficiency of the plant. The only inevitable emissions are CO2, NOx and ash particles, whereas the latter can be minimized with filters. Emission data in this dataset are taken from measurements and literature as well as from communication with experts.
CO2 emissions were calculated out of the carbon content of the wood used as combustible. Carbon emitted in carbon monoxide was subtracted from the result.
Key emissions factors for CO, NOx, CH4, NMVOC and particles were updated according to latest data.
All other emission factors (per MJ fuel input) correspond to the 1000 kW boiler fuelled with wood chips from forest. Other exchanges correspond to the LCI data for the 6400 kW co-generation unit in ecoinvent v2.2.
Good J., Nussbaumer T., Bühler R., Jenni A. (1996) Erfolgskontrolle des SNCRVerfahren
zur Entstickung von Holzfeuerungen. Schlussbericht des BEWProjektes
53894. Zürich, Schweiz.

## Included activities start
From wood chips ready to be burned in cogeneration unit (for heat and power production).

## Included activities end
This activity ends with heat and electricity produced.

This dataset includes the infrastructure, the wood input, the emissions to air and the disposal of the ashes. Also included are substances needed for operation: lubricating oil, organic chemicals, sodium chloride, chlorine and decarbonized water.

## Technology
Electric efficiency: 0.15; Thermal efficiency: 0.45;
Total efficiency: 0.6

## Parameters
- electrical efficiency: 0.15 dimensionless; name efficiency_electrical
  Electric efficiency of the cogeration system, corresponding to annual operation including warm-up and cool-down
  nan
- thermal efficiency: 0.45 dimensionless; name efficiency_thermal
  Thermal efficiency of the cogeration system, corresponding to annual operation including warm-up and cool-down
  nan

## Reference product
- heat, district or industrial, other than natural gas: 1 MJ; name heat_out; = 1*efficiency_thermal; source Thomas Nussbaumer 2014; By-product classification allocatable product; CPC 17300: Steam and hot water
  Thermal efficiency referring to the LHV of the fuel input
  production volume 3.24151e11 MJ
    Calculation/rough estimation. The annual production of heat is calculated based on the production of grid-connected electricity produced with wood. This does not take into account that there might be plants not producing electricity at all or not producing grid-connected electricity or that the efficiencies might be different than those mentioned in the technology comment.
    Factor heat production/electricity production: 4.68E7 MJ/a / 1.35E6 kWh/a
    (Bauer et al. 2007, Tab. 5.8 p. 31)
  property corresponding fuel use, propane, furnace >100kW 0 MJ; name fuel_use
    Lower heating value of the fuel input related to the heat/electricity output, taken directly from ecoinvent v3.0 dataset 'heat production, natural gas, at industrial furnace >100kW, GLO 2000'.
  property exergy 0.169678 MJ; name heat_exergy
    allocation factor for electricity (=1) vs. heat, where heat is calculated as the termodynamic mean temperature Tm = (Tfeed-Treturn)/ln(Tfeed/Treturn), relative to the application temperature (Tu, typically = 293 K), i.e. (Tm-Tu)/Tm
  property price 0.0106 EUR2005
    Average European district heat price from Ecoheatcool and Euroheat 2005-2006, Ecoheat Work package 1: The European heat market. Final report. 10.6 EUR/GJ i s the price of district heat. http://www.solarthermalworld.org/files/Ecoheatcool%20WP1%20Web.pdf?download
  property true value relation 0.169678; name heat_true_value_relation
    property to calculate 'true value' from
  properties: carbon allocation 0 kg, carbon content 0, heating value, net 1 MJ

## Inputs from technosphere
- ammonia, anhydrous, liquid: 3.83705e-10, 1.41019e-8, 3.73665e-9 kg (3 suppliers, which the file names only by identifier); sum of these 1.82222e-8 kg; source Bauer, C. 2007, p. Tab. 9.8 p.61
  literature
  properties: dry mass 1 kg, wet mass 1 kg
- chemical, organic: 1.3e-5 kg; source Bauer, C. 2007
  literature
  properties: carbon content, fossil 0.628, dry mass 1 kg, heating value, net 19.03 MJ, wet mass 1 kg
  note on carbon content, fossil: This dataset is an unweighted average of 20 organic substances (listed in Tab 88.1, ecoinvent v2.2 report 8, part II), being part of the top100 chemicals included in this database. The C-content has also been calculated as an unweighted average of the C content of the substances composing this dataset.
- chlorine, liquid: 7.28889e-7 kg
  literature
  properties: dry mass 1 kg, wet mass 1 kg
- dust collector, electrostatic precipitator, for industrial use: 1.15735e-9 unit; source Bauer, C. 2007
  calculated value, assuming 4000h/a operation time, 20a lifetime, 6667kW (fuel input) capacity
- electricity, high voltage: -9.36735e-5, -7.76427e-5, -1.20381e-5, -5.87363e-5, -2.05432e-5, -0.000263138, -0.000293815, -0.000111532, -8.58701e-5, -4.81767e-5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 kWh (119 suppliers, which the file names only by identifier); sum of these -0.0925926 kWh; = 1*efficiency_electrical/3.6; source Bauer, C. 2007
  Electricl efficiency referring to the LHV of the fuel input
  production volume
    Literature value/statistics. Net production of grid-connected electricity from wood in 2012. No power plant own uses (losses from gross to net) have been assumed. Taken from the IEA electricity information 2014, table 1.3 (solid biofuels).
    IEA. 2014. Electricity Information 2014. ISBN 978-92-64-21692-1. International Energy Agency (IEA), Paris Cedex (FR).
  properties: exergy 3.6 MJ, price 0.0977 EUR2005
  note on exergy: allocation factor for electricity (=1) vs. heat, where heat is calculated as the termodynamic mean temperature Tm = (Tfeed-Treturn)/ln(Tfeed/Treturn), relative to the application temperature (Tu, typically = 293 K), i.e. (Tm-Tu)/Tm
- furnace, wood chips, with silo, 5000kW: 1.15735e-9 unit; source Bauer, C. 2007
  (same comment as for dust collector, electrostatic precipitator, for industrial use)
- heat and power co-generation unit, organic Rankine cycle, 1000kW electrical: 1.15735e-9 unit; source Bauer, C. 2007
  (same comment as for dust collector, electrostatic precipitator, for industrial use)
- lubricating oil: 7.28889e-6 kg; name lubricating_oil; source Bauer, C. 2007
  literature
  properties: carbon content, fossil 0.75, dry mass 1 kg, heating value, net 40.2 MJ, wet mass 1 kg
  note on carbon content, fossil: Lubricating oil is produced from diesel. C-content/dry mass of fats and oils considered 75%, from: ecoinvent v2.2 report, n 15a, pg 40
  note on heating value, net: Literature value, Source: IPCC 2006, 2006 IPCC Guidelines for National Greenhouse Gas Inventories, Prepared by the National Greenhouse Gas Inventories Programme, Eggleston H.S., Buendia L., Miwa K., Ngara T. and Tanabe K. (eds). Published: IGES, Japan
- municipal solid waste: -8.9665e-9, -4.9585e-9, -6.5395e-8, -6.77969e-8, -1.62698e-8, -8.66797e-9, -1.2791e-9, -1.75244e-8, -9.52635e-9, -9.1544e-10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 kg (33 suppliers, which the file names only by identifier); sum of these -7.28889e-6 kg; source Bauer, C. 2007
  literature
  production volume
    Calculated from the production volume of heat, district or industrial, other than natural gas in proportion to the respective output amounts.
  properties: carbon content, fossil 0.171549, carbon content, non-fossil 0.261655, dry mass 0.771 kg, heating value, net 11.74 MJ, water content 0.297017, wet mass 1 kg
  note on carbon content, fossil: MSW composition in tab 4.1, ecoinvent v2.2 report 13_I. C content referred to 1 kg DM
  note on heating value, net: Value taken from the general comment of the treatment dataset.
- sodium chloride, powder: 9.11111e-6 kg; source Bauer, C. 2007
  literature
  properties: dry mass 1 kg, wet mass 1 kg
- waste mineral oil: -7.28889e-6 kg; name waste_oil; = lubricating_oil; source Bauer, C. 2007
  literature
  production volume
    (same comment as for municipal solid waste)
  properties: carbon content, fossil 0.864444, dry mass 0.9 kg, heating value, net 34.7 MJ, water content 0.111111, wet mass 1 kg
  note on carbon content, fossil: Tab A.6, ecoinvent v2.2 report 13_I. C content has been calculated after data in the tables, and then referred to 1 kg DM
- wastewater, average: -6.20462e-9, -1.74268e-6 m3 (2 suppliers, which the file names only by identifier); sum of these -1.74889e-6 m3; = water_decarbonised/1000; source Bauer, C. 2007
  literature
  production volume
    (same comment as for municipal solid waste)
  properties: carbon content, non-fossil 0.194039, dry mass 0.346837 kg, water content 2882.2, wet mass 1000 kg
  note on carbon content, non-fossil: 0.0673 kg TOC/m3 (Tab A.17, ecoinvent v2.2 report 13_I). TOC was considered as Total Carbon.
- water, decarbonised: 0.000339438, 0.00053613, 3.03333e-6, 5.49457e-5, 8.28889e-5, 1.671e-5, 0.000631583, 8.41602e-5 kg (8 suppliers, which the file names only by identifier); sum of these 0.00174889 kg; source Thomas Nussbaumer 2014
  literature
  properties: wet mass 1 kg
- wood ash mixture, pure: -0.00117556 kg; name wood_ash; source Bauer, C. 2007
  literature
  production volume
    (same comment as for municipal solid waste)
  properties: carbon content, non-fossil 0.012, dry mass 1 kg, wet mass 1 kg
- wood chips, wet, measured as dry mass: 0.117312, 0.000265802 kg (2 suppliers, which the file names only by identifier); sum of these 0.117578 kg; source Bauer, C. 2007
  Calculated value.
  LHV of wood chips: 18.9 MJ/kg (dry mass)
  properties: carbon content, non-fossil 0.494, dry mass 1 kg, heating value, net 10.84 MJ, water content 1.1, wet mass 2.1 kg
  note on heating value, net: Value based on the dataset 'softwood forestry, mixed species, sustainable forest management'

## Emissions to nature
- Acetaldehyde [air, urban air close to ground]: 1.35556e-7 kg; source Bauer, C. 2007, p. Tab. 9.8 p.61
  literature
- Ammonia [air, urban air close to ground]: 3.84444e-6 kg; source Bauer, C. 2007, p. Tab. 9.8 p.61
  literature
- Arsenic ion [air, urban air close to ground]: 2.22222e-9 kg; source Bauer, C. 2007, p. Tab. 9.8 p.61
  literature
- Benzene [air, urban air close to ground]: 2.02222e-6 kg
  literature
- Benzene, ethyl- [air, urban air close to ground]: 6.66667e-8 kg; source Bauer, C. 2007, p. Tab. 9.8 p.61
  literature
- Benzene, hexachloro- [air, urban air close to ground]: 1.6e-14 kg
  literature
- Benzo(a)pyrene [air, urban air close to ground]: 1.11111e-9 kg; source Bauer, C. 2007, p. Tab. 9.8 p.61
  literature
- Bromine [air, urban air close to ground]: 1.33333e-7 kg; source Bauer, C. 2007, p. Tab. 9.8 p.61
  literature
- Cadmium II [air, urban air close to ground]: 1.55556e-9 kg; source Bauer, C. 2007, p. Tab. 9.8 p.61
  literature
- Calcium [air, urban air close to ground]: 1.3e-5 kg; source Thomas Nussbaumer 2014, p. Tab. 9.8 p.61
  literature
- Carbon dioxide, non-fossil [air, urban air close to ground]: 0.213333 kg; source Thomas Nussbaumer 2014
  literature
- Carbon monoxide, non-fossil [air, urban air close to ground]: 0.000444444 kg; source Bauer, C. 2007
  expert estimation (see source)
- Chlorine [air, urban air close to ground]: 4e-7 kg; source Bauer, C. 2007, p. Tab. 9.8 p.61
  literature
- Chromium III [air, urban air close to ground]: 8.8e-9 kg; source Bauer, C. 2007, p. Tab. 9.8 p.61
  literature
- Chromium VI [air, urban air close to ground]: 8.88889e-11 kg; source Bauer, C. 2007, p. Tab. 9.8 p.61
  literature
- Copper ion [air, urban air close to ground]: 4.88889e-8 kg; source Thomas Nussbaumer 2014, p. Tab. 9.8 p.61
  literature
- Dinitrogen monoxide [air, urban air close to ground]: 5.11111e-6 kg
  literature
- Dioxins, measured as 2,3,7,8-tetrachlorodibenzo-p-dioxin [air, urban air close to ground]: 6.88889e-14 kg; source Bauer, C. 2007, p. Tab. 9.8 p.61
  literature
- Fluorine [air, urban air close to ground]: 1.11111e-7 kg; source Bauer, C. 2007, p. Tab. 9.8 p.61
  literature
- Formaldehyde [air, urban air close to ground]: 2.88889e-7 kg; source Bauer, C. 2007, p. Tab. 9.8 p.61
  literature
- Hydrocarbons, aliphatic, alkanes, unspecified [air, urban air close to ground]: 2.02222e-6 kg; source Bauer, C. 2007, p. Tab. 9.8 p.61
  literature
- Hydrocarbons, aliphatic, unsaturated [air, urban air close to ground]: 6.88889e-6 kg; source Bauer, C. 2007, p. Tab. 9.8 p.61
  literature
- Lead II [air, urban air close to ground]: 5.55556e-8 kg; source Bauer, C. 2007, p. Tab. 9.8 p.61
  literature
- Magnesium [air, urban air close to ground]: 8e-7 kg; source Bauer, C. 2007, p. Tab. 9.8 p.61
  literature
- Manganese II [air, urban air close to ground]: 3.77778e-7 kg; source Thomas Nussbaumer 2014, p. Tab. 9.8 p.61
  literature
- Mercury II [air, urban air close to ground]: 6.66667e-10 kg; source Bauer, C. 2007, p. Tab. 9.8 p.61
  literature
- Methane, non-fossil [air, urban air close to ground]: 3.33333e-6 kg; source Bauer, C. 2007
  expert estimation (see source)
- NMVOC, non-methane volatile organic compounds [air, urban air close to ground]: 7.77778e-6 kg; source Bauer, C. 2007, p. Tab. 9.8 p.61
  expert estimation (see source)
- Nickel II [air, urban air close to ground]: 1.33333e-8 kg; source Bauer, C. 2007, p. Tab. 9.8 p.61
  literature
- Nitrogen oxides [air, urban air close to ground]: 0.000333333 kg; source Bauer, C. 2007
  expert estimation (see source)
- PAH, polycyclic aromatic hydrocarbons [air, urban air close to ground]: 2.46667e-8 kg; source Bauer, C. 2007, p. Tab. 9.8 p.61
  literature
- Particulate Matter, < 2.5 um [air, urban air close to ground]: 5.55556e-5 kg; source Bauer, C. 2007, p. p.60
  expert estimation (see source)
- Phenol, pentachloro- [air, urban air close to ground]: 1.8e-11 kg; source Thomas Nussbaumer 2014, p. Tab. 9.8 p.61
  literature
- Phosphorus [air, urban air close to ground]: 6.66667e-7 kg; source Bauer, C. 2007, p. Tab. 9.8 p.61
  literature
- Potassium I [air, urban air close to ground]: 5.2e-5 kg; source Bauer, C. 2007, p. Tab. 9.8 p.61
  literature
- Sodium [air, urban air close to ground]: 2.88889e-6 kg
  literature
- Sulfur dioxide [air, urban air close to ground]: 5.55556e-6 kg; source Bauer, C. 2007
  literature
- Toluene [air, urban air close to ground]: 6.66667e-7 kg; source Bauer, C. 2007, p. Tab. 9.8 p.61
  literature
- Water [air, non-urban air or from high stacks]: 0.000129333 m3; source Bauer, C. 2007
  calculation based on water balance
- Zinc II [air, urban air close to ground]: 6.66667e-7 kg; source Bauer, C. 2007, p. Tab. 9.8 p.61
  literature
- m-Xylene [air, urban air close to ground]: 2.66667e-7 kg; source Bauer, C. 2007, p. Tab. 9.8 p.61
  literature

## Sampling procedure
literature, expert judgement, extrapolation

## Extrapolations
This dataset has been copied from a dataset valid for Switzerland (CH) without adjustment of any emission data. Uncertainty has been adjusted accordingly.
