# air separation, xenon krypton purification

Dataset: EcoSpold 2, unit process
Geography: RER
Time period: 1998-01-01 to 2022-12-31
Technology level: current
Classification: ISIC rev.4 ecoinvent: 2011:Manufacture of basic chemicals
Classification: EcoSpold01Categories: chemicals/inorganics
Scenario: Business-as-Usual
System model: Substitution, consequential, long-term
Generated by: Alex Primas
Published in: Althaus H.-J. 2007
Database: ecoinvent
isCopyrightProtected: true

## General comment
The process describes the production of pure xenon and krypton deriven from a crude concentrate from a cryogenic air separation process. As products only gaseous xenon and gaseous krypton were considered. Oxygen that is used as carrier material and returned to the air separation process is not considered. The allocation factors were calculated from the sales price of xenon and krypton in Europe in the year 1998. The ressources xenon, krypton were allocated to 100% to the corresponing product.
[This dataset was already contained in the ecoinvent database version 2. It was not individually updated during the transfer to ecoinvent version 3. Life Cycle Impact Assessment results may still have changed, as they are affected by changes in the supply chain, i.e. in other datasets. This dataset was generated following the ecoinvent quality guidelines for version 2. It may have been subject to central changes described in the ecoinvent version 3 change report (http://www.ecoinvent.org/database/ecoinvent-version-3/reports-of-changes/), and the results of the central updates were reviewed extensively. The changes added e.g. consistent water flows and other information throughout the database. The documentation of this dataset can be found in the ecoinvent reports of version 2, which are still available via the ecoinvent website. The change report linked above covers all central changes that were made during the conversion process.]

## Included activities end
Xenon, krypron as ressource, Electricity for process, cooling water and waste heat. Estimation for process infrastructure .

## Geography
Data from an producer in europe. Further data from a study from New Zealand.

## Technology
Kr-Xe-concentrate with 99.7% O2 is obtained from a side column of large air separation plants. Processes as purification and further distillation and the achieved yield may vary. Data represents an average process.

## Parameters
- fraction, cooling water, cooling pond system, to air: 0.032 dimensionless; name fraction_CW_CP_to_air; lognormal variance with pedigree 0.0413, pedigree (2,3,1,3,1)
  Calculated based on literature value (Scown, C.D., 2011, Water Footprint of U.S. Transportation Fuels and supplying information of the article) (Vionnet, S., Quantis Water Database - Technical Report, 2012).
- fraction, cooling water, once-through system, to air: 0.004 dimensionless; name fraction_CW_OT_to_air; lognormal variance with pedigree 0.0413, pedigree (2,3,1,3,1)
  (same comment as for fraction, cooling water, cooling pond system, to air)
- fraction, cooling water, recirculating system, to air: 0.771 dimensionless; name fraction_CW_R_to_air; lognormal variance with pedigree 0.0413, pedigree (2,3,1,3,1)
  (same comment as for fraction, cooling water, cooling pond system, to air)
- fraction, cooling water, to air: 0.3875 dimensionless; name fraction_CW_to_air; = (0.5*fraction_CW_OT_to_air)+(0.5*fraction_CW_R_to_air); lognormal variance with pedigree 0.092025, pedigree (4,4,3,2,4)
  Calculated value based on literature value (see comments of the other parametres present in this dataset) and expert opinion. In the case when no industry/literature data are available about the type of cooling or directly fraction, cooling water, to air specific for the process a default assumption is applied. It is assumed that the once-through cooling system is used in 50% of all cases and recirculating system is used in another 50% of all cases.

## Reference product
- xenon, gaseous: 1 kg; name xenon_gaseous_RP; By-product classification allocatable product; CPC 34231: Chemical elements n.e.c.; inorganic acids except phosphoric, nitric and sulphonitric; inorganic oxygen compoun[…]; CAS 7440-63-3
  EcoSpold01Location=RER
  production volume 255.713 kg
    Calculated based on literature value (Ullman's Encyclopedia). Approximately 7000 m3/year of xenon is produced in the world (data from 1998). 5.894 kg/m3 is the density of xenon, gaseous. The european production volume is extrapolated from the global production volume using GDP (2005, world: 61711 USD, Europe: 13287 USD).
  property price 81.1 EUR2005
    Temporary price data. Calculated as 90% of purchasers price based on: Calculated relative to Krypton, based on 2004 price relations given in Kirk-Othmer (2005).
  properties: EcoSpold01Allocation_undefined_1 42.9001, EcoSpold01Allocation_undefined_2 42.9001, carbon allocation 0 kg, carbon content 0, carbon content, fossil 0, carbon content, non-fossil 0, dry mass 1 kg, water content 0, water in wet mass 0 kg, wet mass 1 kg

## Inputs from technosphere
- air separation facility: 4.7619e-6 unit; lognormal variance with pedigree 0.6481, pedigree (5,5,5,3,5)
  Estimated value
  EcoSpold01Location=RER
  Uncertainty: Estimated
- electricity, medium voltage: 3285.71 kWh; lognormal variance with pedigree 0.054, pedigree (3,4,5,1,1)
  Estimated value; data from an average process, estimations
  EcoSpold01Location=UCTE
  Uncertainty: Data from an average process, estimations
- krypton, gaseous: -8.52381 kg; name krypton_gaseous_output
  production volume
    Calculated value
  properties: EcoSpold01Allocation_undefined_1 57.0999, EcoSpold01Allocation_undefined_2 57.0999, dry mass 1 kg, price 12.8 EUR2005, wet mass 1 kg

## Inputs from nature
- Krypton [natural resource, in air]: 8.52381 kg; lognormal variance with pedigree 0.2106, pedigree (5,5,5,5,5)
  Calculated value; ressource input determined from output
  Uncertainty: Ressource input determined from output
- Water, cooling, unspecified natural origin [natural resource, in water]: 6.66667 m3; name water_cooling_UNO_input; lognormal variance with pedigree 0.124, pedigree (3,4,5,1,4)
  Estimated value, assumtions of technology used for cooling
  Uncertainty: Assumtions of technology used for cooling
- Xenon [natural resource, in air]: 1 kg; lognormal variance with pedigree 0.2106, pedigree (5,5,5,5,5)
  (same comment as for Krypton)

## Emissions to nature
- Water [air, unspecified]: 2.58333 m3; name water_to_air_unspecified; = (water_cooling_UNO_input*fraction_CW_to_air); lognormal variance with pedigree 0.0807, pedigree (2,2,5,1,1)
  Calculated value based on literature values and expert opinion. See comments in the parametres' comment field.
  property fraction, origin: fresh water 0; name fraction_origin_fresh_water
  property fraction, origin: salt water 0; name fraction_origin_salt_water
  property fraction, origin: unspecified 1; name fraction_origin_unspecified
- Water [water, unspecified]: 4.08333 m3; name water_to_water_unspecified; = water_cooling_UNO_input*(1-fraction_CW_to_air); lognormal variance with pedigree 0.0807, pedigree (2,2,5,1,1)
  (same comment as for Water)
  property fraction, origin: fresh water 0; name fraction_origin_fresh_water_Ww
  property fraction, origin: salt water 0; name fraction_origin_salt_water_Ww
  property fraction, origin: unspecified 1; name fraction_origin_unspecified_Ww

## Sampling procedure
Production amount world-wide about 30-40 t/a for xenon and 300-400 t/a for krypton. Amount of production represented in Europe is not known.

## Extrapolations
Energy data represent an average process. Cooling water demand extrapolated from the assumed technology with cooling tower. Infrastructure represents only a rougth estimate.

## Review by Roland Hischier 2003-08-27
Passed.

## Review by Bo Weidema 2012-07-02
Passed. Xenon as reference product.
