# cadmium sludge from zinc electrolysis stockpiling

Dataset: EcoSpold 2, unit process
Geography: US
Time period: 2012-01-01 to 2022-12-31
Technology level: current
Classification: EcoSpold01Categories: metals/extraction
Classification: ISIC rev.4 ecoinvent: 2420:Manufacture of basic precious and other non-ferrous metals
Scenario: Business-as-Usual
System model: Substitution, consequential, long-term
Generated by: Emilia Moreno Ruiz
Database: ecoinvent
isCopyrightProtected: true

## General comment
Stockpiling is a way of assuring provision and control over supplies, and is systematically applied with some commodities by several countries.
The United States has a known and well documented national stockpiling service. Cadmium can be found as one of the commodities that is stockpiled, as it is considered of strategic importance.
This dataset describes the stockpiling of cadmium sludge following zinc electrolysis. The stockpiling is considered to happen in the geographical sourroundings of the electrolysis site.
Sources:
-US Department of defense, 2013, Strategic and Critical Materials - Report on Stockpile Requirements.
-Reconfiguration of the National Defense Stockpile Report to Congress, April 2009.

## Included activities start
Activity starts with the arrival of cadmium sludge to the stockpile

## Included activities end
The activity ends with the provision of the service of stockpiling cadmium sludge

## Geography
dataset for cadmium storage

## Reference product
- cadmium sludge from zinc electrolysis: 1 kg; By-product classification allocatable product; CPC 39367: Waste and scrap of tungsten, molybdenum, tantalum, magnesium, cobalt, cadmium, titanium, zirconium, beryllium […]
  production volume 1 kg
  property concentration, cadmium 0 kg/kg
    Calculated value transfered from "primary zinc production from concentrate" dataset.
  properties: carbon allocation 0 kg, carbon content 0, carbon content, fossil 0, carbon content, non-fossil 0, dry mass 1 kg, price 0 EUR2005, water content 0, water in wet mass 0 kg, wet mass 1 kg

## Inputs from technosphere
- cadmium sludge from zinc electrolysis stockpiling: 1 kg
  production volume
    The amount of cadmium sludge being stockpiled per year has been estimated as equaling 1% of the total cadmium sludge production in 2005 in the US. Cadmium concentration is assumed to be 0.45 in the sludge.
    The cadmium sludge production has been estimated using the information on cadmium production in minerals.usgs.gov/minerals/pubs/commodity/cadmium/myb1-2007-cadmi.xls
  properties: price 0.989904 EUR2005
- gravel, crushed: -0.00267855 kg; = 3.5714E-06*50E-2*1500; lognormal variance with pedigree 0.2106, pedigree (5,5,5,5,5)
  Estimation. It is estimated a ground sealing with 50 cm gravel bed, 3 mm plastic geo-sealing sheet and 20 cm of asphalt cover.
  The density of gravel is 1500 kg/m3 (http://www.substech.com/dokuwiki/doku.php?id=thermoplastic_low_density_polyethylene_ldpe)
  properties: dry mass 1 kg, wet mass 1 kg
- mastic asphalt: -0.00142856 kg; = 3.5714E-06*20E-2*2000; lognormal variance with pedigree 0.2106, pedigree (5,5,5,5,5)
  Estimation. It is estimated a ground sealing with 50 cm gravel bed, 3 mm plastic geo-sealing sheet and 20 cm of asphalt cover.
  The density of asphalt concrete is 2000 kg/m3.(http://www.substech.com/dokuwiki/doku.php?id=thermoplastic_low_density_polyethylene_ldpe)
  properties: carbon content, fossil 0.0968869, dry mass 1 kg, heating value, net 2.94 MJ, wet mass 1 kg
- packaging film, low density polyethylene: -9.85706e-6 kg; = 3.5714E-06*3E-3*920; lognormal variance with pedigree 0.2106, pedigree (5,5,5,5,5)
  Estimation. It is estimated a ground sealing with 50 cm gravel bed, 3 mm plastic geo-sealing sheet and 20 cm of asphalt cover.
  The density of low density polyethylene is 920 kg/m3. (http://www.substech.com/dokuwiki/doku.php?id=thermoplastic_low_density_polyethylene_ldpe)
  properties: carbon content, fossil 0.857143, dry mass 1 kg, heating value, net 42.47 MJ, wet mass 1 kg
- steel, unalloyed: -3.45e-6 kg; = (122.5*1*2 + 25*2*2)/100000000; lognormal variance with pedigree 0.2106, pedigree (5,5,5,5,5)
  Adapted from steel use in sulfur storage, due to lack of specific data. The amount of steel is estimated from a picture of a typical sulfur storage area (see link below)
  http://www.kwhconstructors.com/services.bulk.maintenance.php?gallery=pacificcoastterminalssulfurstack-rake
  There are two main parts containing steel:
  - 1 steel structure and conveyor. The estimated dimensions are 25m*2m*2m
  - 1 steel track that has the lenght of the storage area. It is assumed a rectangular storage area with dimension of122.5m*40.8 m. The dimensions of the track are 122.5m*2m*1m
  properties: carbon content, fossil 0.0025, dry mass 1 kg, wet mass 1 kg

## Inputs from nature
- Occupation, dump site [natural resource, land]: -0.00025 m2*year; name occupation_area; = 5*5000*70/(100000000*70); source Keystone Environmental LTD. 2007; lognormal variance with pedigree 0.0526, pedigree (2,4,4,5,1)
  Adapted from storage of sulfur, due to lack of specific data. For sulfur, the data is obtained from a storage project in Port Ridley, Alberta, Canada,
  The planned area for dry bulk sulfur storage is 5,000 m2.
  The max. capacity is 100,000 tonnes.The lifetime of the stockpile is estimated as 70 years.
  It is estimated that the average storage time of 1 kg of lead for stockpiling is 5 years. This is considered a reasonable time period to assure proper storage and retrievability. Thus, after 5 years the stocked material will be retrieved or changed to a new placement, in order to ensure proper access and keep the shafts accessible.
  The occupation is calculated:
  5 (kg*years) *5000 (m2) *70 years /((100000000 (kg) * 70 (years) )
- Transformation, from unspecified [natural resource, land]: -3.57143e-6 m2; = 0.00025/70; source Keystone Environmental LTD. 2007; lognormal variance with pedigree 0.1326, pedigree (2,4,4,5,1)
  Adapted from storage of sulfur, due to lack of specific data. For sulfur, the data is obtained from a storage project in Port Ridley, Alberta, Canada,
  The planned area for dry bulk sulfur storage is 5,000 m2.
  The max. capacity is 100,000 tonnes.The lifetime of the stockpile is estimated as 70 years.
  It is estimated that the average storage time of 1 kg of lead for stockpiling is 5 years. This is considered a reasonable time period to assure proper storage and retrievability. Thus, after 5 years the stocked material will be retrieved or changed to a new placement, in order to ensure proper access and keep the shafts accessible.
  The transformation is calculated as:
  occupation area / lifetime of stockpile
- Transformation, to dump site [natural resource, land]: -3.57143e-6 m2; name transformation_area; = 0.00025/70; source Keystone Environmental LTD. 2007; lognormal variance with pedigree 0.1326, pedigree (2,4,4,5,1)
  Adapted from storage of sulfur, due to lack of specific data. For sulfur, the data is obtained from a storage project in Port Ridley, Alberta, Canada,
  The planned area for dry bulk sulfur storage is 5,000 m2.
  The max. capacity is 100,000 tonnes. The lifetime of the stockpile is estimated as 70 years.
  It is estimated that the average storage time of 1 kg of lead for stockpiling is 5 years. This is considered a reasonable time period to assure proper storage and retrievability. Thus, after 5 years the stocked material will be retrieved or changed to a new placement, in order to ensure proper access and keep the shafts accessible.
  The transformation is calculated as:
  occupation area / lifetime of stockpile

## Extrapolations
land occupation is adapted from sulfur storage
