# 2-methylpentane to generic market for solvent, organic

Dataset: EcoSpold 2, unit process
Geography: GLO
Time period: 2012-01-01 to 2022-12-31
Technology level: current
Classification: ISIC rev.4 ecoinvent: 20:Manufacture of chemicals and chemical products
Synonyms: pentane,2-methyl-; 1,1-dimethylbutane; methylpentane
Scenario: Business-as-Usual
System model: Substitution, consequential, long-term
Generated by: Sofia Parada Tur
Database: ecoinvent
isCopyrightProtected: true

## General comment
This is a linking activity which links the product 2-methylpentane to the generic market for organic solvents. All chemicals that enter this market provide the function of an organic solvent.

## Included activities start
The activity starts with the reception of 2-methylpentane

## Included activities end
The activity ends with the production of solvent, organic for the generic market

## Reference product
- 2-methylpentane: 1 kg; By-product classification allocatable product; CPC 341: Basic organic chemicals; CAS 107-83-5
  The activity links this product to the market for solvent organic
  production volume 1 kg
  property heating value, net 45.02 MJ
    LHV is calculated based on the elemental composition of the substance. Based on the CAS number of the substance (000107-83-5), the chemical formula of the substance is found to be: C6H14, (PubChem 2020).
    Reference: Kim, S., Chen, J., Cheng, T., Gindulyte, A., He, J., He, S., Li, Q., Shoemaker, B. A., Thiessen, P. A., Yu, B., Zaslavsky, L., Zhang, J., & Bolton, E. E. (2019). PubChem 2019 update: improved access to chemical data. Nucleic acids research, 47(D1), D1102–D1109. https://doi.org/10.1093/nar/gky1033
  properties: carbon allocation 0.837209 kg, carbon content 0.837209, carbon content, fossil 0.837209, carbon content, non-fossil 0, dry mass 1 kg, price 0 EUR2005, water content 0, water in wet mass 0 kg, wet mass 1 kg

## Inputs from technosphere
- solvent, organic: 1 kg
  production volume
    calculated from the global production volume of naphtha for 2005 (UN energy statistics, http://data.un.org/Data.aspx?d=EDATA&f=cmID%3aNP).
    The global production of naphtha is then multiplied by the relative output of 2-methylpentane in the molecular sieve separation of naphtha (refer to dataset "molecular sieve separation of naphtha")
  properties: carbon content, fossil 0.63072, dry mass 1 kg, heating value, net 19.11 MJ, price 1.36 EUR2005, wet mass 1 kg

## Review by Bo Weidema 2012-04-20
Passed
