# heat and power co-generation, natural gas, mini-plant 2KW electrical

Dataset: EcoSpold 2, unit process
Geography: RoW
Time period: 2000-01-01 to 2022-12-31
Technology level: current
Classification: ISIC rev.4 ecoinvent: 3530:Steam and air conditioning supply
Classification: EcoSpold01Categories: natural gas/cogeneration
Tags: with true value
Scenario: Business-as-Usual
System model: Substitution, consequential, long-term
Generated by: [System]
Published in: Heck, T. 2007
Database: ecoinvent
isCopyrightProtected: true

## General comment
The multioutput-process 'natural gas, burned in Mini-BHKW, allocation exergy' delivers the coproducts 'heat, at Mini-BHKW, allocation exergy' and 'electricity, at Mini-BHKW, allocation exergy'. The exergy allocation is the allocation scheme suggested to be used within ecoinvent (e.g. in electricity mixes).
[This dataset was already contained in the ecoinvent database version 2. It was not individually updated during the transfer to ecoinvent version 3. Life Cycle Impact Assessment results may still have changed, as they are affected by changes in the supply chain, i.e. in other datasets. This dataset was generated following the ecoinvent quality guidelines for version 2. It may have been subject to central changes described in the ecoinvent version 3 change report (http://www.ecoinvent.org/database/ecoinvent-version-3/reports-of-changes/), and the results of the central updates were reviewed extensively. The changes added e.g. consistent water flows and other information throughout the database. The documentation of this dataset can be found in the ecoinvent reports of version 2, which are still available via the ecoinvent website. The change report linked above covers all central changes that were made during the conversion process.]

## Included activities end
The module includes fuel input, infrastructure, emissions to air, and substances needed for operation.

## Geography
Could be used for central European conditions.

## Technology
Specific manufacturer (Ecopower in Switzerland)

## Parameters
- scaling factor: 1.53846 dimensionless

## Reference product
- heat, central or small-scale, natural gas: 1 MJ; = 0.65 * scaling_factor; By-product classification allocatable product; CPC 17300: Steam and hot water
  Amount was scaled to 1.
  EcoSpold01Location=CH
  production volume 1.9149e10 MJ
    Estimation. This value does not reflect real conditions. The annual production volume determines the shares of supplying activities on a certain market.
    The share of heat, central or small-scale, natural gas from CHP plants was assumed to amount to ca.3%; the share from pure heat plants was assumed to amount to ca.97%. The annual production volumes of all supplying datasets reflect these shares on the market, but are not realistic production volumes.
    See talk pages for further discussion of the modelling of the heat markets.
  property Corresponding fuel use 1.40166 MJ; name fuel_use; = 35.532*0.0256410256410256/0.65
    Lower heating value of the fuel input related to the heat/electricity output
  property exergy 0.1393 MJ; name exergy
    allocation factor for electricity (=1) vs. heat, where heat is calculated as the termodynamic mean temperature Tm = (Tfeed-Treturn)/ln(Tfeed/Treturn), relative to the application temperature (Tu, typically = 293 K), i.e. (Tm-Tu)/Tm
  property price 0.01 EUR2005
    Temporary price data. Calculated as 90% of purchasers price based on: Average European district heat price from Ecoheatcool and Euroheat 2005-2006, Ecoheat Work package 1: The European heat market. Final report. http://www.solarthermalworld.org/files/Ecoheatcool%20WP1%20Web.pdf?download
  property true value relation 0.1393; name true_value_relation
    property to calculate "true value" from
  properties: EcoSpold01Allocation_undefined_1 27, EcoSpold01Allocation_undefined_10 27, EcoSpold01Allocation_undefined_11 27, EcoSpold01Allocation_undefined_12 27, EcoSpold01Allocation_undefined_13 27, EcoSpold01Allocation_undefined_14 27, EcoSpold01Allocation_undefined_15 27, EcoSpold01Allocation_undefined_17 100, EcoSpold01Allocation_undefined_2 27, EcoSpold01Allocation_undefined_3 0, EcoSpold01Allocation_undefined_4 100, EcoSpold01Allocation_undefined_5 27, EcoSpold01Allocation_undefined_6 27, EcoSpold01Allocation_undefined_7 27, EcoSpold01Allocation_undefined_8 27, EcoSpold01Allocation_undefined_9 27, carbon allocation 0 kg, carbon content 0, heating value, net 1 MJ

## Inputs from technosphere
- electricity, low voltage: -0.00135602, -0.0816098, -0.00910155, -0.00977622, -0.000340876, -0.00458477 kWh (6 suppliers, which the file names only by identifier); sum of these -0.106769 kWh; = 0.0694 * scaling_factor; lognormal variance with pedigree 0.21, pedigree (5,5,5,5,5)
  EcoSpold01Location=CH
  Amount was scaled to the amount of reference product.
  production volume
    Calculated value
  properties: EcoSpold01Allocation_undefined_1 73, EcoSpold01Allocation_undefined_10 73, EcoSpold01Allocation_undefined_11 73, EcoSpold01Allocation_undefined_12 73, EcoSpold01Allocation_undefined_13 73, EcoSpold01Allocation_undefined_14 73, EcoSpold01Allocation_undefined_15 73, EcoSpold01Allocation_undefined_16 100, EcoSpold01Allocation_undefined_2 73, EcoSpold01Allocation_undefined_3 100, EcoSpold01Allocation_undefined_5 73, EcoSpold01Allocation_undefined_6 73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
- lubricating oil: 4.61538e-5 kg; = 3E-05 * scaling_factor; lognormal variance with pedigree 0.052, pedigree (1,1,5,5,1)
  vender information
  Amount was scaled to the amount of reference product.
  EcoSpold01Location=RER
  properties: carbon content, fossil 0.75, dry mass 1 kg, heating value, net 40.2 MJ, wet mass 1 kg
  note on carbon content, fossil: Lubricating oil is produced from diesel. C-content/dry mass of fats and oils considered 75%, from: ecoinvent v2.2 report, n 15a, pg 40
  note on heating value, net: Literature value, Source: IPCC 2006, 2006 IPCC Guidelines for National Greenhouse Gas Inventories, Prepared by the National Greenhouse Gas Inventories Programme, Eggleston H.S., Buendia L., Miwa K., Ngara T. and Tanabe K. (eds). Published: IGES, Japan
- mini CHP plant, common components for heat+electricity: 2.13846e-7 unit; = 1.39E-07 * scaling_factor; lognormal variance with pedigree 0.042, pedigree (1,1,5,5,1)
  EcoSpold01Location=CH
  Amount was scaled to the amount of reference product.
- mini CHP plant, components for electricity only: 2.13846e-7 unit; = 1.39E-07 * scaling_factor; lognormal variance with pedigree 0.042, pedigree (1,1,5,5,1)
  EcoSpold01Location=CH
  Amount was scaled to the amount of reference product.
- mini CHP plant, components for heat only: 2.13846e-7 unit; = 1.39E-07 * scaling_factor; lognormal variance with pedigree 0.042, pedigree (1,1,5,5,1)
  Amount was scaled to the amount of reference product.
  EcoSpold01Location=CH
- natural gas, low pressure: 0.00121534, 0.011344, 0.0246975, 0.00161196, 0.000578859 m3 (5 suppliers, which the file names only by identifier); sum of these 0.0394477 m3; = 0.0256410256410256 * scaling_factor; lognormal variance with pedigree 0.042, pedigree (1,1,5,5,1)
  EcoSpold01Location=CH
  Amount was scaled to the amount of reference product.
  properties: carbon content, fossil 0.695187, dry mass 1 kg, heating value, gross 39 MJ, heating value, net 36 MJ, wet mass 1 kg
  note on carbon content, fossil: C content considered the same as in high pressure (consumption mix)
  note on heating value, net: Literature value, Source: Christoph Meili;Niels Jungbluth;Maresa Bussa (2021) Life cycle inventories of crude oil and natural gas extraction. ESU-services Ltd. commissioned by BAFU & VSG, Schaffhausen, Switzerland, http://esu-services.ch/data/public-lci-reports/
- waste mineral oil: -4.61538e-5 kg; name waste_min_oil; = 3E-05 * scaling_factor; lognormal variance with pedigree 0.122, pedigree (1,1,1,5,1)
  EcoSpold01Location=CH
  rough estimate
  Amount was scaled to the amount of reference product.
  production volume
    Calculated value
  properties: carbon content, fossil 0.864444, dry mass 0.9 kg, heating value, net 34.7 MJ, water content 0.111111, wet mass 1 kg
  note on carbon content, fossil: Tab A.6, ecoinvent v2.2 report 13_I. C content has been calculated after data in the tables, and then referred to 1 kg DM
  note on heating value, net: Value taken from the general comment of the treatment dataset.

## Emissions to nature
- Carbon dioxide, fossil [air, urban air close to ground]: 0.0861538 kg; = 0.056 * scaling_factor; lognormal variance with pedigree 0.042, pedigree (1,1,5,5,1)
  composition of natural gas
  Amount was scaled to the amount of reference product.
- Carbon monoxide, fossil [air, urban air close to ground]: 0.000196923 kg; = 0.000128 * scaling_factor; lognormal variance with pedigree 0.162, pedigree (1,1,5,5,1)
  technical documentation of manufacturer
  Amount was scaled to the amount of reference product.
- Dinitrogen monoxide [air, urban air close to ground]: 3.84615e-6 kg; = 2.5E-06 * scaling_factor; lognormal variance with pedigree 0.342, pedigree (1,1,5,5,1)
  rough estimate
  Amount was scaled to the amount of reference product.
- Methane, fossil [air, urban air close to ground]: 6.61538e-5 kg; = 4.3E-05 * scaling_factor; lognormal variance with pedigree 0.342, pedigree (1,1,5,5,1)
  (Schmieder 2002)
  Amount was scaled to the amount of reference product.
- NMVOC, non-methane volatile organic compounds [air, urban air close to ground]: 7.69231e-6 kg; = 5E-06 * scaling_factor; lognormal variance with pedigree 0.342, pedigree (1,1,5,5,1)
  (Schmieder 2002)
  Amount was scaled to the amount of reference product.
- Nitrogen oxides [air, urban air close to ground]: 3.38462e-5 kg; = 2.2E-05 * scaling_factor; lognormal variance with pedigree 0.162, pedigree (1,1,5,5,1)
  (same comment as for Carbon monoxide, fossil)
- Particulate Matter, < 2.5 um [air, urban air close to ground]: 2.30769e-7 kg; = 1.5E-07 * scaling_factor; lognormal variance with pedigree 0.162, pedigree (1,1,5,5,1)
  estimate based on different references
  Amount was scaled to the amount of reference product.
- Sulfur dioxide [air, urban air close to ground]: 8.46154e-7 kg; = 5.5E-07 * scaling_factor; lognormal variance with pedigree 0.042, pedigree (1,1,5,5,1)
  composition of natural gas
  Amount was scaled to the amount of reference product.

## Sampling procedure
Manufacturer information.

## Extrapolations
This dataset has been copied from a dataset valid for Switzerland. Uncertainty has been adjusted accordingly. The Annual Production volume is estimated to be only slightly higher than the one for Switzerland for market mix reasons. The Swiss Annual Production volume is valid for the year 2009. Uncertainty has been adjusted accordingly.
