# soybean meal and crude oil production

Dataset: EcoSpold 2, unit process
Geography: RoW
Time period: 1998-01-01 to 2022-12-31
Technology level: current
Classification: ISIC rev.4 ecoinvent: 1040:Manufacture of vegetable and animal oils and fats
Classification: EcoSpold01Categories: biomass/fuels
Scenario: Business-as-Usual
System model: Substitution, consequential, long-term
Share of production covered: 0 %
Generated by: Tereza Levova
Published in: Jungbluth N. 2007
Database: ecoinvent
isCopyrightProtected: true

## General comment
Inventory refers to the production of 1 kg crude soybean oil, respectively soybean meal (incl. hulls). The multioutput-process 'soybeans, in oil mill' delivers the co-products 'crude soybean oil, at oil mill' and 'soybean meal, at oil mill'.
[This dataset was already contained in the ecoinvent database version 2. It was not individually updated during the transfer to ecoinvent version 3. Life Cycle Impact Assessment results may still have changed, as they are affected by changes in the supply chain, i.e. in other datasets. This dataset was generated following the ecoinvent quality guidelines for version 2. It may have been subject to central changes described in the ecoinvent version 3 change report (http://www.ecoinvent.org/database/ecoinvent-version-3/reports-of-changes/), and the results of the central updates were reviewed extensively. The changes added e.g. consistent water flows and other information throughout the database. The documentation of this dataset can be found in the ecoinvent reports of version 2, which are still available via the ecoinvent website. The change report linked above covers all central changes that were made during the conversion process.]
[This dataset is meant to replace the following datasets:
- soybean meal and crude oil production, GLO, 1998 - 2006]

## Included activities start
From arrival of the soybeans to the mill through crushing and processing to crude, degummed soybean oil and soybean meal.

## Included activities end
This process includes the processing of soybeans to crude soybean oil and meal. System boundary is at the oil mill.

## Technology
Typical oil mill designed for soybean oil solvent extraction (incl. pre-cracking of soybeans, dehulling, oil extraction, meal processing and oil purification), US context.

## Time period
Data from 1998 to 2005, current technology for soybean oil extraction

## Parameters
- fraction, process water, to air: 0.15 dimensionless; name fraction_PW_to_air; lognormal variance with pedigree 0.092025, pedigree (4,4,3,2,4)
  Literature value. In case when no industry/process specific data are available, default evaporation fraction value is used. This value is 15% and is based on literature (Statistics Canada, 2007 & Shaffer, K.H., 2008, Consumptive water use in the Great Lakes Basin, USGS & Shiklomanov, 2003, World Water Resources at the Beginning of the 21st Century) and has been approved by an expert.
- fraction, tap water, to air: 0.15 dimensionless; name fraction_TW_to_air; = fraction_PW_to_air; lognormal variance with pedigree 0.092025, pedigree (4,4,3,2,4)
  Calculated value. See comment in the other parametres present in this dataset. Tap water is considered to be always used as process water, thus process water fractions to air are applied to all tap water input flows to calculate the amount of water consumed in the processes.

## Reference product
- soybean meal: 1 kg; name soybean_meal_output; By-product classification allocatable product; CPC 21920: Flours and meals of oil seeds or oleaginous fruits, except those of mustard
  EcoSpold01Location=US
  production volume 1.34701e11 kg
    Calculated relative to oil output (794/118.1=422%)
  property carbon content, non-fossil 0.475627
    Composition data obtained from Table 2 in Uses of Canola Meal, J. Bonnardeaux, Department of Agriculture and Food, Western Australia, 2007. First, composition data were refered to 1 kg dry mass. Then, C-contents were calculated considering a C-content/dry mass of 46% in carbohydrates (including fibres), 53% in proteins and 75% in fats. All data from "Evolutionary and Biochemical Aspects", A.D. Kay and T. Vrede (in Global Ecology, 2010, Elsevier B.V., S.E. Jørgensen Ed.).
  properties: carbon allocation 0.423308 kg, carbon content 0.475627, carbon content, fossil 0, dry mass 0.89 kg, price 0.528626 EUR2005, water content 0.123596, water in wet mass 0.11 kg, wet mass 1 kg

## Inputs from technosphere
- electricity, medium voltage: 3.76661e-5, 0.000138532, 5.71803e-5, 0.00156496, 0.00108779, 0.000201287, 0.000325673, 9.14597e-5, 1.35831e-5, 5.19076e-5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 kWh (28 suppliers, which the file names only by identifier); sum of these 0.069 kWh; lognormal variance with pedigree 0.0446, pedigree (2,4,5,5,1)
  EcoSpold01Location=US
  Calculated based on global average.
  Uncertainty: Based on US study, cross-checking with various literature references, industrial data
- heat, central or small-scale, other than natural gas: 0.0112 MJ; lognormal variance with pedigree 0.164, pedigree (5,4,5,5,4)
  Calculated based on global average.
  properties: heating value, net 1 MJ
- heat, district or industrial, natural gas: 0.124045, 0.8175 MJ (2 suppliers, which the file names only by identifier); sum of these 0.941546 MJ; lognormal variance with pedigree 0.0446, pedigree (2,4,5,5,1)
  Based on US study, cross-checking with various literature references, industrial data
  EcoSpold01Location=RER
  Uncertainty: Based on US study, cross-checking with various literature references, industrial data
  properties: heating value, net 1 MJ
- heat, district or industrial, other than natural gas: 0.374346, 0.000653676 MJ (2 suppliers, which the file names only by identifier); sum of these 0.375 MJ; lognormal variance with pedigree 0.0446, pedigree (2,4,5,5,1)
  EcoSpold01Location=RER
  Calculated based on global average.
  Uncertainty: Based on US study, cross-checking with various literature references, industrial data
  properties: heating value, net 1 MJ
- hexane: 0.00224673 kg; lognormal variance with pedigree 0.0446, pedigree (2,4,5,5,1)
  (same comment as for heat, district or industrial, natural gas)
  properties: carbon content, fossil 0.837209, dry mass 1 kg, heating value, net 45.02 MJ, wet mass 1 kg
- inert waste, for final disposal: -0.00210603 kg; name inert_waste_output; = (1/4131)*8.7; lognormal variance with pedigree 0.0107, pedigree (4,4,1,3,1)
  Calculated based on the local - US - soybean meal and crude oil production.
  production volume
    Calculated from production volume of reference product using the relative outputs.
  properties: dry mass 0.995 kg, water content 0.00502513, wet mass 1 kg
- oil mill: 9.09091e-10 unit; = 1/lifetime_capacity_kg; lognormal variance with pedigree 0.4761, pedigree (4,5,5,3,5)
  Calculation, according to production capacity and lifetime of the plant
  property lifetime capacity [kg] 1.1e9 kg; name lifetime_capacity_kg; = 22000000*50
- phosphoric acid, industrial grade, without water, in 85% solution state: 7e-5 kg; lognormal variance with pedigree 0.0421, pedigree (1,2,5,5,1)
  Calculated based on global average.
  EcoSpold01Location=RER
  Uncertainty: Literature data & biodiesel producers
  properties: dry mass 1 kg, wet mass 1 kg
- soybean: 1.27 kg; lognormal variance with pedigree 0.042, pedigree (1,1,5,5,1)
  Calculated based on global average
  properties: carbon content, non-fossil 0.524508, dry mass 0.89 kg, water content 0.123596, wet mass 1 kg
  note on carbon content, non-fossil: Composition data obtained from Soybeans, green, raw, in (http://www.nal.usda.gov/fnic/foodcomp/search/). First, composition data were refered to 1 kg dry mass. Then, C-contents were calculated considering a C-content/dry mass of 46% in carbohydrates (including fibres), 53% in proteins and 75% in fats. All data from "Evolutionary and Biochemical Aspects", A.D. Kay and T. Vrede (in Global Ecology, 2010, Elsevier B.V., S.E. Jørgensen Ed.).
- soybean oil, crude: -0.237 kg; name soybean_oil_crude_output
  Calculated based on global average
  production volume
    Data from FAO for "oil, soybean" (http://www.fao.org/faostat/en/#data/QCL). The production volume PV for World in 2019 was 59904292 t/year. It is assumed that 99% of globally produced soybean oil is extracted by solvent, and 1% using mechanical extraction.
  properties: carbon content, non-fossil 0.768, dry mass 1 kg, heating value, net 38.4 MJ, price 1.22147 EUR2005, wet mass 1 kg
  note on heating value, net: Values is approximated from HHV from "vegetable oil, crude". Source: Radovanovic,M.; Zivanovic,T.; Stojiljkovic,D.; Jovanovic,V.; Jerinic,N.; Knezevic,S. et.al. Utilization of sunflower husk as a fuel for industrial boilers - 20 years experience. Proc. 5th Eur. Conf. on Industrial Furnaces&Boilers 2000,vol.2,p.221-233. Available at: https://phyllis.nl/Biomass/View/2152
- tap water: 0.0100004, 0.0186602, 0.000168194, 0.00656013, 0.252169, 0.0724417 kg (6 suppliers, which the file names only by identifier); sum of these 0.36 kg; lognormal variance with pedigree 0.0446, pedigree (2,4,5,5,1)
  Calculated based on global average
  EcoSpold01Location=RER
  Uncertainty: Based on US study, cross-checking with various literature references, industrial data
  properties: carbon content, fossil 0.00178991, dry mass 0.000337476 kg, water content 2962.17, wet mass 1 kg
  note on carbon content, fossil: Bicarbonate content is 2.93 mol/m3. CO2 content is 0.1 mol/m3 (ecoinvent v2.2 report 8, Tab 93.1).

## Emissions to nature
- Hexane [air, non-urban air or from high stacks]: 0.00071653 kg; lognormal variance with pedigree 0.1206, pedigree (1,1,5,4,4)
  Calculated based on global average. The original amount (0.000135kg) was changed (0.00071653kg) to better reflect the values in the regional (US) dataset.
- Hexane [air, urban air close to ground]: 0.001 kg; lognormal variance with pedigree 0.082, pedigree (1,1,5,5,1)
  Calculated based on global average.
  Uncertainty: Emissions are taken to be equal to input of gas
- Hydrochloric acid [air, urban air close to ground]: 1.23e-5 kg; lognormal variance with pedigree 0.112, pedigree (3,5,5,5,1)
  Calculated based on global average.
  Uncertainty: Data from survey in literature (van Däniken et al. 1995)
- Water [air, unspecified]: 5.4e-5 m3; name water_to_air_unspecified; = (tap_water_input/1000)*fraction_TW_to_air; lognormal variance with pedigree 0.130025, pedigree (4,4,5,2,4)
  Calculated value based on literature values and expert opinion. See comments in the parametres' comment field.
  property fraction, origin: fresh water 1; name fraction_origin_fresh_water
  property fraction, origin: salt water 0; name fraction_origin_salt_water
  property fraction, origin: unspecified 0; name fraction_origin_unspecified
- BOD5, Biological Oxygen Demand [water, surface water]: 7.3e-5 kg; lognormal variance with pedigree 0.112, pedigree (3,5,5,5,1)
  Calculated as 0.5*COD.
  Uncertainty: Data from survey in literature (van Däniken et al. 1995)
- COD, Chemical Oxygen Demand [water, surface water]: 0.00037 kg; lognormal variance with pedigree 0.112, pedigree (3,5,5,5,1)
  Data from survey in literature (van Däniken et al. 1995)
  Uncertainty: Data from survey in literature (van Däniken et al. 1995)
- DOC, Dissolved Organic Carbon [water, surface water]: 0.00014 kg; lognormal variance with pedigree 0.112, pedigree (3,5,5,5,1)
  Calculated as equal to TOC.
  Uncertainty: Data from survey in literature (van Däniken et al. 1995)
- Dissolved solids [water, surface water]: 7.87463e-7 kg; lognormal variance with pedigree 0.112, pedigree (3,5,5,5,1)
  (same comment as for COD, Chemical Oxygen Demand)
- Oils, non-fossil [water, surface water]: 0.000183 kg; lognormal variance with pedigree 0.1014, pedigree (2,2,5,3,2)
  Calculated based on global average.
- TOC, Total Organic Carbon [water, surface water]: 0.00014 kg; lognormal variance with pedigree 0.112, pedigree (3,5,5,5,1)
  Calculated by default as TOC (gC) = COD/2.7 (COD measured in g O2). Should more correctly be calculated from the carbon content of the specified emissions to water.
  Uncertainty: Data from survey in literature (van Däniken et al. 1995)
- Water [water, unspecified]: 0.000306 m3; name water_to_water_unspecified; = (tap_water_input/1000)*(1-fraction_TW_to_air); lognormal variance with pedigree 0.130025, pedigree (4,4,5,2,4)
  (same comment as for Water)
  property fraction, origin: fresh water 1; name fraction_origin_fresh_water_Ww
  property fraction, origin: salt water 0; name fraction_origin_salt_water_Ww
  property fraction, origin: unspecified 0; name fraction_origin_unspecified_Ww

## Sampling procedure
Calculated as a production-volume-weighted average of the revised local datasets.

## Review by Bo Weidema 2012-03-15
New Global avearge due to new data from USA
