# sawing and planing, paraná pine, kiln dried

Dataset: EcoSpold 2, unit process
Geography: RoW
Time period: 1999-01-01 to 2022-12-31
Technology level: current
Classification: ISIC rev.4 ecoinvent: 1610:Sawmilling and planing of wood
Synonyms: Araucaria angustifolia
Tags: Swiss brush-up completed
Scenario: Business-as-Usual
System model: Substitution, consequential, long-term
Generated by: Nora Minas
Published in: Althaus H.J. 2007
Database: ecoinvent
isCopyrightProtected: true

## General comment
This dataset represents the sawing and planing of one m3 Paraná pine logs. The inventory stems from one well-documented, large, vertically integrated sawmill.
Data on debarking and sawmilling is only available from one of the two companies.
Due to a lack of detailed information technical drying is assumed using part of the residual wood as fuel. The energy requirements and respective wood inputs are calculated based on average European processes for softwood.

Data on sawing the timber stems from only one of the two companies.
[This dataset is meant to replace the following datasets:
- sawing and planing, paraná pine, kiln dried, GLO, 2000 - 2005]

## Included activities start
Sawing and planing processes starting from debarked Paraná pine logs at sawmill in Brazil.

## Included activities end
This activity ends with sawn and planed Paraná pine at the sawmill. The dataset includes transportation to sawmill by lorry, sawing into timber and technical drying.

## Geography
wood consumption for technical drying is estimated based on European data

## Technology
The dataset represents average European technology regarding the energy requirements and respective wood inputs. 45% of the log input (including sapwood) is generated as a co-product partly used for technical drying and partly sold or used for energy recovery used outside this process.
Data may vary depending on the specific sawing and drying technology and the wood density of particular logs and types of sawn timber produced.

## Parameters
- input wood fuel: 766 MJ; name wood_fuel; lognormal variance with pedigree 0.0662, pedigree (1,3,1,4,4)
  input of wood fuel used in production, i.e. internal wood residues from processing sawnwood; expressed in MJ of absolutely dry mass (lower heating value at humidity u=0%).

## Reference product
- sawnwood, paraná pine, dried (u=10%): 1 m3; name sawnwood_paranapine_RP; By-product classification allocatable product; CPC 31101: Wood, sawn or chipped lengthwise, sliced or peeled, of a thickness exceeding 6 mm, of coniferous wood
  Reference product. Sawn and planed timber logs produced from parana pine trees by (close to) sustainable forest management in Brazil. The logs is subsequently shipped to Europe and used in wooden products.
  production volume 3.78551e6 m3
    Estimated. The global production volume is extrapolated from the BR production volume assuming that BR produces 70% of glboal production.
  property carbon content, non-fossil 0.494
    C content of dry mass is 0.494 kgC/kg dry wood (ecoinvent v2.2 report 21).
  property heating value, net 7300.06 MJ
    LHV is calculated based on the Carbon content of the product. More details can be found on the respective documentation.The property is based on a value of 12.7MJ/kg
  property price 160 EUR2005
    Expert judgement (Urs Luginbühl, Swiss Sawmilling industry, personal communication in June 2014). Cross-reference; FAOSTAT (accessed 20140428). The price is calculated by using data on total world import quantity (m3) and import value (1000 USD), year 2005. 109432798 m3 of Sawnwood (C) - coniferous was imported in the world in 2005. The import value was 22249842000 USD. The calculated price is thus (22249842000/109432798=203*0.8=) 164 Euro.
  properties: carbon allocation 247 kg, carbon content 0.494, carbon content, fossil 0, dry mass 500 kg, water content 0.15, water in wet mass 75 kg, wet mass 575 kg

## Inputs from technosphere
- electricity, low voltage: -0.00165023, -0.0546596, -8.49711e-5, -0.00235665, -0.0369336, -2.22278, -0.247896, -0.00507451, -0.00426564, -0.00375044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 kWh (30 suppliers, which the file names only by identifier); sum of these -3.1942 kWh; lognormal variance with pedigree 0.0276, pedigree (2,1,1,5,1)
  Estimation. 45% of log input (including sapwood) is generated as co-product that is partly used for technical drying and partly sold or used for energy recovery used outside this process.
  Further reference: Bauer (2003).
  production volume
    Calculated from production volume of reference product using the relative outputs.
  properties: price 0.107 EUR2005
- electricity, medium voltage: 0.45113, 1.65921, 0.684852, 18.7436, 2.41083, 58.9511, 3.90061, 1.09542, 0.162686, 0.621702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 kWh (30 suppliers, which the file names only by identifier); sum of these 975 kWh; source Alexandrido, S. 2000; lognormal variance with pedigree 0.067, pedigree (1,1,5,5,1)
  Estimation. Calculation based on given source.
  properties: UVEK_link_1 1708, UVEK_relative_amount_1 1
  note on UVEK_link_1: to be used only in special submissions in coordination with ecoinvent and the Swiss FOEN
- furnace, wood chips, with silo, 300kW: 1.68871e-5 unit; = 2.31481481481482E-08*wood_fuel/1.05; lognormal variance with pedigree 0.592, pedigree (1,1,5,5,1)
  Infrastructure factor from DS 'Heat, district or industrial, other than natural gas {CH}| heat production, wood chips from industry, at furnace 300kW | Cut-off, U', multiplied by the input of wood fuel (direct wood fuel plus production residues); correction for assumed efficiency as original value refers to heat output
  properties: UVEK_link_1 999999, UVEK_relative_amount_1 1
- sawlog and veneer log, paraná pine, measured as solid wood under bark: 2.19 m3; name roundwood_input; source Alexandrido, S. 2000; lognormal variance with pedigree 0.071, pedigree (3,4,5,5,1)
  Estimation. Volume under bark. Calculation based on given source. (link introduced in v3.5)
  properties: carbon content, non-fossil 0.494, dry mass 588.235 kg, heating value, net 6870.62 MJ, water content 0.5, wet mass 882.353 kg
  note on carbon content, non-fossil: C content of dry mass is 0.494 kgC/kg dry wood (ecoinvent v2.2 report 21).
- sawmill: 4e-7 unit; source Werner F. 2007; lognormal variance with pedigree 0.596, pedigree (3,4,5,5,1)
  Estimation. No site-specific data available. Estimation from given (European) source.
- technical wood drying facility: 1.83e-5 unit; lognormal variance with pedigree 0.5926, pedigree (2,1,5,5,1)
  data taken from ecoinvent 2.2
- transport, freight, lorry, unspecified: 17.6626, 3.16134, 153.088 metric ton*km (3 suppliers, which the file names only by identifier); sum of these 173.912 metric ton*km; = 90*roundwood_input*500*(1+0.5)/(1-0.15)/1000; source Werner F. 2007; lognormal variance with pedigree 0.528, pedigree (4,5,5,5,5)
  90 km transport distance at 500 kg/m3 oven-dry matter, 50% moisture content and 15% of bark [up until v2.2, this input, representing transport to the saw mill, was supplied by 'lorry, >16 tonne, fleet average, RER']
  properties: UVEK_link_1 4417, UVEK_relative_amount_1 1
- wood ash mixture, pure: -0.326529, -0.00321917, -0.156601 kg (3 suppliers, which the file names only by identifier); sum of these -0.486349 kg; = 0.000666666666666667*wood_fuel/1.05; lognormal variance with pedigree 0.0276, pedigree (2,1,1,5,1)
  Emission factor from DS on heat generation from industrial residual wood mulitplied by the input of wood fuel (direct wood fuel plus production residues), scaled to convert wood input to resulting heat.
  production volume
    Calculated from production volume of reference product using the relative outputs.
  properties: UVEK_link_1 1129, UVEK_relative_amount_1 -1, carbon content, non-fossil 0.012, dry mass 1 kg, wet mass 1 kg

## Emissions to nature
- Acetaldehyde [air, unspecified]: 4.4501e-5 kg; = 6.1E-08*wood_fuel/1.05; lognormal variance with pedigree 0.2432, pedigree (2,3,5,5,1)
  Emission factor from DS 'Heat, district or industrial, other than natural gas {CH}| heat production, wood chips from industry, at furnace 300kW | Cut-off, U' on heat generation from industrial residual wood per MJ, multiplied by the input of wood fuel (direct wood fuel plus production residues ) scaled to reflect wood input per generated heat.
- Ammonia [air, unspecified]: 0.00126208 kg; = 1.73E-06*wood_fuel/1.05; lognormal variance with pedigree 0.2432, pedigree (2,3,5,5,1)
  (same comment as for Acetaldehyde)
- Arsenic ion [air, unspecified]: 7.29524e-7 kg; = 1E-09*wood_fuel/1.05; lognormal variance with pedigree 0.2432, pedigree (2,3,5,5,1)
  (same comment as for Acetaldehyde)
- Benzene [air, unspecified]: 0.000663867 kg; = 9.1E-07*wood_fuel/1.05; lognormal variance with pedigree 0.2432, pedigree (2,3,5,5,1)
  (same comment as for Acetaldehyde)
- Benzene, ethyl- [air, unspecified]: 2.18857e-5 kg; = 3E-08*wood_fuel/1.05; lognormal variance with pedigree 0.2432, pedigree (2,3,5,5,1)
  (same comment as for Acetaldehyde)
- Benzene, hexachloro- [air, unspecified]: 5.25257e-12 kg; = 7.2E-15*wood_fuel/1.05; lognormal variance with pedigree 0.2432, pedigree (2,3,5,5,1)
  (same comment as for Acetaldehyde)
- Benzo(a)pyrene [air, unspecified]: 3.64762e-7 kg; = 5E-10*wood_fuel/1.05; lognormal variance with pedigree 0.5932, pedigree (2,3,5,5,1)
  (same comment as for Acetaldehyde)
- Bromine [air, unspecified]: 4.37714e-5 kg; = 6E-08*wood_fuel/1.05; lognormal variance with pedigree 0.8432, pedigree (2,3,5,5,1)
  (same comment as for Acetaldehyde)
- Cadmium II [air, unspecified]: 5.10667e-7 kg; = 7E-10*wood_fuel/1.05; lognormal variance with pedigree 0.8432, pedigree (2,3,5,5,1)
  (same comment as for Acetaldehyde)
- Calcium [air, unspecified]: 0.00426771 kg; = 5.85E-06*wood_fuel/1.05; lognormal variance with pedigree 0.2432, pedigree (2,3,5,5,1)
  (same comment as for Acetaldehyde)
- Carbon dioxide, non-fossil [air, unspecified]: 74.4114 kg; = 0.102*wood_fuel/1.05; lognormal variance with pedigree 0.0682, pedigree (2,3,5,5,1)
  (same comment as for Acetaldehyde)
- Carbon monoxide, non-fossil [air, unspecified]: 0.145905 kg; = 2E-04*wood_fuel/1.05; lognormal variance with pedigree 0.2432, pedigree (2,3,5,5,1)
  (same comment as for Acetaldehyde)
- Chlorine [air, unspecified]: 0.000131314 kg; = 1.8E-07*wood_fuel/1.05; lognormal variance with pedigree 0.2432, pedigree (2,3,5,5,1)
  (same comment as for Acetaldehyde)
- Chromium III [air, unspecified]: 2.88891e-6 kg; = 3.96E-09*wood_fuel/1.05; lognormal variance with pedigree 0.8432, pedigree (2,3,5,5,1)
  (same comment as for Acetaldehyde)
- Chromium VI [air, unspecified]: 2.9181e-8 kg; = 4E-11*wood_fuel/1.05; lognormal variance with pedigree 0.8432, pedigree (2,3,5,5,1)
  (same comment as for Acetaldehyde)
- Copper ion [air, unspecified]: 1.60495e-5 kg; = 2.2E-08*wood_fuel/1.05; lognormal variance with pedigree 0.2432, pedigree (2,3,5,5,1)
  (same comment as for Acetaldehyde)
- Dinitrogen monoxide [air, unspecified]: 0.0016779 kg; = 2.3E-06*wood_fuel/1.05; lognormal variance with pedigree 0.2432, pedigree (2,3,5,5,1)
  (same comment as for Acetaldehyde)
- Dioxins, measured as 2,3,7,8-tetrachlorodibenzo-p-dioxin [air, unspecified]: 2.18857e-11 kg; = 3E-14*wood_fuel/1.05; lognormal variance with pedigree 0.5932, pedigree (2,3,5,5,1)
  (same comment as for Acetaldehyde)
- Fluorine [air, unspecified]: 3.64762e-5 kg; = 5E-08*wood_fuel/1.05; lognormal variance with pedigree 0.2432, pedigree (2,3,5,5,1)
  (same comment as for Acetaldehyde)
- Formaldehyde [air, unspecified]: 9.48381e-5 kg; = 1.3E-07*wood_fuel/1.05; lognormal variance with pedigree 0.2432, pedigree (2,3,5,5,1)
  (same comment as for Acetaldehyde)
- Hydrocarbons, aliphatic, alkanes, unspecified [air, unspecified]: 0.000663867 kg; = 9.1E-07*wood_fuel/1.05; lognormal variance with pedigree 0.2432, pedigree (2,3,5,5,1)
  (same comment as for Acetaldehyde)
- Hydrocarbons, aliphatic, unsaturated [air, unspecified]: 0.00226152 kg; = 3.1E-06*wood_fuel/1.05; lognormal variance with pedigree 0.2432, pedigree (2,3,5,5,1)
  (same comment as for Acetaldehyde)
- Lead II [air, unspecified]: 1.82381e-5 kg; = 2.5E-08*wood_fuel/1.05; lognormal variance with pedigree 0.8432, pedigree (2,3,5,5,1)
  (same comment as for Acetaldehyde)
- Magnesium [air, unspecified]: 0.000262629 kg; name magnesium; = 3.6E-07*wood_fuel/1.05; lognormal variance with pedigree 0.2432, pedigree (2,3,5,5,1)
  (same comment as for Acetaldehyde)
- Manganese II [air, unspecified]: 0.000124019 kg; name manganese; = 1.7E-07*wood_fuel/1.05; lognormal variance with pedigree 0.2432, pedigree (2,3,5,5,1)
  (same comment as for Acetaldehyde)
- Mercury II [air, unspecified]: 2.18857e-7 kg; name mercury; = 3E-10*wood_fuel/1.05; lognormal variance with pedigree 0.8432, pedigree (2,3,5,5,1)
  (same comment as for Acetaldehyde)
- Methane, non-fossil [air, unspecified]: 0.00109429 kg; = 1.5E-06*wood_fuel/1.05; lognormal variance with pedigree 0.2432, pedigree (2,3,5,5,1)
  (same comment as for Acetaldehyde)
- NMVOC, non-methane volatile organic compounds [air, unspecified]: 0.00255333 kg; name nmvoc; = 3.5E-06*wood_fuel/1.05; lognormal variance with pedigree 0.2432, pedigree (2,3,5,5,1)
  (same comment as for Acetaldehyde)
- Nickel II [air, unspecified]: 4.37714e-6 kg; name nickel; = 6E-09*wood_fuel/1.05; lognormal variance with pedigree 0.8432, pedigree (2,3,5,5,1)
  (same comment as for Acetaldehyde)
- Nitrogen oxides [air, unspecified]: 0.0875429 kg; = 0.00012*wood_fuel/1.05; lognormal variance with pedigree 0.2432, pedigree (2,3,5,5,1)
  (same comment as for Acetaldehyde)
- PAH, polycyclic aromatic hydrocarbons [air, unspecified]: 8.09771e-6 kg; name pah; = 1.11E-08*wood_fuel/1.05; lognormal variance with pedigree 0.5932, pedigree (2,3,5,5,1)
  (same comment as for Acetaldehyde)
- Particulate Matter, < 2.5 um [air, unspecified]: 0.00182381 kg; = 2.5E-06*wood_fuel/1.05; lognormal variance with pedigree 0.5932, pedigree (2,3,5,5,1)
  (same comment as for Acetaldehyde)
- Particulate Matter, > 2.5 um and < 10um [air, unspecified]: 0.00486349 kg; = 6.66666666666667E-06*wood_fuel/1.05
  (same comment as for Acetaldehyde)
- Phenol, pentachloro- [air, unspecified]: 5.90914e-9 kg; = 8.1E-12*wood_fuel/1.05; lognormal variance with pedigree 0.3932, pedigree (2,3,5,5,1)
  (same comment as for Acetaldehyde)
- Phosphorus [air, unspecified]: 0.000218857 kg; = 3E-07*wood_fuel/1.05; lognormal variance with pedigree 0.2432, pedigree (2,3,5,5,1)
  (same comment as for Acetaldehyde)
- Potassium I [air, unspecified]: 0.0170709 kg; = 2.34E-05*wood_fuel/1.05; lognormal variance with pedigree 0.2432, pedigree (2,3,5,5,1)
  (same comment as for Acetaldehyde)
- Sodium [air, unspecified]: 0.000948381 kg; = 1.3E-06*wood_fuel/1.05; lognormal variance with pedigree 0.2432, pedigree (2,3,5,5,1)
  (same comment as for Acetaldehyde)
- Sulfur dioxide [air, unspecified]: 0.00182381 kg; = 2.5E-06*wood_fuel/1.05; lognormal variance with pedigree 0.0682, pedigree (2,3,5,5,1)
  (same comment as for Acetaldehyde)
- Toluene [air, unspecified]: 0.000218857 kg; = 3E-07*wood_fuel/1.05; lognormal variance with pedigree 0.3932, pedigree (2,3,5,5,1)
  (same comment as for Acetaldehyde)
- Zinc II [air, unspecified]: 0.000218857 kg; = 3E-07*wood_fuel/1.05; lognormal variance with pedigree 0.8432, pedigree (2,3,5,5,1)
  (same comment as for Acetaldehyde)
- m-Xylene [air, unspecified]: 8.75429e-5 kg; name mxylene; = 1.2E-07*wood_fuel/1.05; lognormal variance with pedigree 0.3932, pedigree (2,3,5,5,1)
  (same comment as for Acetaldehyde)

## Sampling procedure
literature

## Extrapolations
see Geography This dataset has been copied from an original dataset covering the geography BR. The uncertainty has been adjusted accordingly.
