# processing of anode slime from electrorefining of copper, anode

Dataset: EcoSpold 2, unit process
Geography: GLO
Time period: 2010-01-01 to 2022-12-31
Technology level: current
Classification: ISIC rev.4 ecoinvent: 2420:Manufacture of basic precious and other non-ferrous metals
Synonyms: precious metals refining
Scenario: Business-as-Usual
System model: Substitution, consequential, long-term
Share of production covered: 50 %
Generated by: David Turner
Published in: Turner, D. A. 2020
Database: ecoinvent
isCopyrightProtected: true

## General comment
For the processing of anode slimes from primary copper electrorefining globally.
Background: Metals are produced as part of a complex, highly interconnected and interdependent system, with many desirable but scarce/critical metals recovered as by-products during the production of one or more ‘host’ metal(s). Copper is one of the world’s major mineral commodities and is mined from heterogeneous sulfide or oxide mineral deposits in countries worldwide. Copper sulfide deposits, such as those of the porphyry or massive sulphide type, contain numerous other valuable minerals, which are desirable to society. Copper is mined & beneficiated to produce a copper sulfide concentrate, as well as other by-product concentrates (e.g. molybdenite), which are sold to smelters. Copper sulfide concentrates are smelted to produce the intermediate product, copper anode. This is then sold to refineries, where it is electrorefined to produce copper cathode, which is sold to fabricators. The by-product of copper electrorefining is anode slime, which contains various important by-product metals (principally gold, silver, selenium & tellurium) and is sold to precious metal recovery plants for further processing to recover the valuable metals.
Modelling approach: Amounts of exchanges to the environment and from the technosphere were taken from the treatment activity, “treatment of precious metal from electronics scrap, in anode slime, precious metal extraction”, which was used here as a proxy for the treatment of anode slime from primary copper production via pyrometallurgy. The amounts of by products from the process were calculated through a global material flow analysis of primary copper production. Further information is provided in the accompanying documentation (see Turner & Hischier, 2020). Electrical energy demand was based on Chatterjee et al. (1996).
References
Chatterjee, B. (1996). Electrowinning of gold from anode slimes. Materials Chemistry and Physics, 45, 27-32.
Turner, D. A. & Hischier, R. (2020). Life cycle inventories of pyrometallurgical copper production and anode slime processing. Empa, St. Gallen, Switzerland.

## Included activities start
Upon delivery of anode slime.

## Included activities end
The refining of gold and silver; the packaging of copper telluride cement and crude selenium.

## Allocation
No allocation is applied.

## Geography
Amounts of exchanges to the environment and from the technosphere based on data from a Swedish anode slime processing plant that is singular in the region and ranges worldwide among the big producer. It may be taken as approximation for the global situation. Amounts of by-products based on the typical global situation.

## Technology
Based on typical current technology. Anode slime treatment by pressure leaching and top blown rotary converter. Production of Silver by Möbius Electrolysis, Gold by Wohlwill electrolysis, copper telluride cement and crude selenium to further processing.

## Time period
Production volumes are representative of the situation in 2015 but are considered valid until the end of 2019. Data sources for the inventory model have not been updated since v2.1 (see Classen et al. 2009), but the amounts of by-products have been adjusted to represent the current situation.
References
Classen, M., Althaus, H.-J., Blaser, S., Scharnhost, W., Tuchschmid, M., Jungbluth, N., & Emmenegger, M. F. (2009). Life cycle inventories of metals. Final report, ecoinvent data v2.1, No. 10. Dübendorf, Switzerland.

## Reference product
- copper telluride cement: 1 kg; name Te; By-product classification allocatable product; CPC 41411: Copper mattes; cement copper; normal variance with pedigree 0.0591, pedigree (1,1,1,1,1)
  Based on a global material flow analysis, considering global production of tellurium
  production volume 527104 kg
    Calculated through a global material flow analysis of copper production; input data taken from a variety of literature sources (see accompanying documentation)
  property price 3.99175 EUR2005
    Assuming 10.7% Te content, price estimated based on Te content of the product and using 5-year market average Te price (2015-2019; USD/kg; USGS [2020]) and converted to EUR2005 (USD2019/EUR2005 exchange rate: 0.62; Official Data Foundation [2020] and Macrotrends [2020]).
    References:
    Official Data Foundation (2020). Inflation Calculator [Online]. Available from: https://www.officialdata.org/us/inflation/2005?endYear=2019&amount=1 [Accessed 28/07/2020]
    USGS (2020). Mineral Commodity Summaries 2020 [Online]. Available from: https://pubs.usgs.gov/periodicals/mcs2020/mcs2020.pdf [Accessed 28/07/2020]
    Macrotrends (2020). Euro Dollar Exchange Rate (EUR USD) - Historical Chart [Online]. Available from: https://www.macrotrends.net/2548/euro-dollar-exchange-rate-historical-chart [Accessed 28/07/2020]
  properties: carbon allocation 0 kg, carbon content 0, carbon content, fossil 0, carbon content, non-fossil 0, dry mass 1 kg, water content 0, water in wet mass 0 kg, wet mass 1 kg

## Inputs from technosphere
- anode slime from electrorefining of copper, anode: 84.5309 kg; lognormal variance with pedigree 0.0118, pedigree (2,3,4,5,1)
  Amount taken from the dataset 'treatment of precious metal from electronics scrap, in anode slime, precious metal extraction'
  properties: copper content 0.176063, dry mass 1 kg, gold content 0.0025, selenium content 0.064214, silver content 0.0901024, tellurium content 0.00431524, wet mass 1 kg
- copper slag: -78.5691 kg; name Slag; normal variance with pedigree 0.0194, pedigree (4,5,1,5,2)
  Based on a global material flow analysis. Nickel smelter slag is used as a proxy here to represent the treatment of residues produced during the treatment of anode slime.
  production volume
    (same comment as for copper telluride cement)
  properties: calcium content 0.052382, chromium content 0.011599, copper content 0.420136, dry mass 1 kg, gold content 0.000305065, iron content 0.046421, selenium content 0.0365859, silicon content 0.6496, silver content 0.0782106, tellurium content 0.00427201, tungsten content 0.23999, wet mass 1 kg
- electricity, high voltage: 114.962 kWh; lognormal variance with pedigree 0.0439, pedigree (2,2,5,5,2)
  Based on Chatterjee (1996)
  References
  Chatterjee, B. (1996). Electrowinning of gold from anode slimes. Materials Chemistry and Physics, 45, 27-32.
- gold: -0.201099 kg; name Au; normal variance with pedigree 0.0006, pedigree (5,5,5,5,5)
  Based on a global material flow analysis and the typical gold content of anode slimes (calculated as the arithmetic mean of available literature values)
  production volume
    Calculated from production volume of reference product using the relative outputs.
  properties: dry mass 1 kg, price 25128.4 EUR2005, wet mass 1 kg
- heat, district or industrial, other than natural gas: 14.4593 MJ; lognormal variance with pedigree 0.0506, pedigree (1,1,5,5,3)
  (same comment as for anode slime from electrorefining of copper, anode)
  properties: heating value, net 1 MJ
- oxygen, liquid: 3.47408, 0.953247 kg (2 suppliers, which the file names only by identifier); sum of these 4.42732 kg; lognormal variance with pedigree 0.0587, pedigree (4,2,5,5,3)
  (same comment as for anode slime from electrorefining of copper, anode)
  properties: dry mass 1 kg, wet mass 1 kg
- precious metal refinery: 1.39144e-5 unit; lognormal variance with pedigree 0.3507, pedigree (2,2,5,5,3)
  (same comment as for anode slime from electrorefining of copper, anode)
- selenium: -4.19527 kg; name Se; normal variance with pedigree 0.0021, pedigree (2,3,2,3,2)
  Based on a global material flow analysis, considering global production of selenium
  production volume
    (same comment as for copper telluride cement)
  properties: dry mass 1 kg, price 25.9305 EUR2005, selenium content 0.991859, wet mass 1 kg
- silver: -4.90605 kg; name Ag; normal variance with pedigree 0.0006, pedigree (5,5,5,5,5)
  Based on a global material flow analysis and the typical silver content of anode slimes (calculated as the arithmetic mean of available literature values)
  production volume
    (same comment as for copper telluride cement)
  properties: dry mass 1 kg, price 324.357 EUR2005, wet mass 1 kg

## Emissions to nature
- Cadmium II [air, non-urban air or from high stacks]: 6.2614e-6 kg; lognormal variance with pedigree 0.7, pedigree (1,1,5,5,3)
  (same comment as for anode slime from electrorefining of copper, anode)
- Chlorine [air, non-urban air or from high stacks]: 0.0132744 kg; lognormal variance with pedigree 0.09, pedigree (1,1,5,5,3)
  (same comment as for anode slime from electrorefining of copper, anode)
- Copper ion [air, non-urban air or from high stacks]: 9.39234e-5 kg; lognormal variance with pedigree 0.7, pedigree (1,1,5,5,3)
  (same comment as for anode slime from electrorefining of copper, anode)
- Dioxins, measured as 2,3,7,8-tetrachlorodibenzo-p-dioxin [air, non-urban air or from high stacks]: 2.62988e-7 kg; lognormal variance with pedigree 0.09, pedigree (1,1,5,5,3)
  (same comment as for anode slime from electrorefining of copper, anode)
- Fluorine [air, non-urban air or from high stacks]: 0.000106445 kg; lognormal variance with pedigree 0.09, pedigree (1,1,5,5,3)
  (same comment as for anode slime from electrorefining of copper, anode)
- Lead II [air, non-urban air or from high stacks]: 0.0025923 kg; lognormal variance with pedigree 0.7, pedigree (1,1,5,5,3)
  (same comment as for anode slime from electrorefining of copper, anode)
- Mercury II [air, non-urban air or from high stacks]: 1.2523e-5 kg; lognormal variance with pedigree 0.7, pedigree (1,1,5,5,3)
  (same comment as for anode slime from electrorefining of copper, anode)
- Nitrogen oxides [air, non-urban air or from high stacks]: 0.0363177 kg; lognormal variance with pedigree 0.09, pedigree (1,1,5,5,3)
  (same comment as for anode slime from electrorefining of copper, anode)
- Particulate Matter, < 2.5 um [air, non-urban air or from high stacks]: 0.00278634 kg; lognormal variance with pedigree 0.35, pedigree (1,1,5,5,3)
  (same comment as for anode slime from electrorefining of copper, anode)
- Particulate Matter, > 10 um [air, non-urban air or from high stacks]: 0.000928788 kg; lognormal variance with pedigree 0.09, pedigree (1,1,5,5,3)
  (same comment as for anode slime from electrorefining of copper, anode)
- Particulate Matter, > 2.5 um and < 10um [air, non-urban air or from high stacks]: 0.00185757 kg; lognormal variance with pedigree 0.17, pedigree (1,1,5,5,3)
  (same comment as for anode slime from electrorefining of copper, anode)
- Sulfur dioxide [air, non-urban air or from high stacks]: 0.0281777 kg; lognormal variance with pedigree 0.0506, pedigree (1,1,5,5,3)
  (same comment as for anode slime from electrorefining of copper, anode)
- Zinc II [air, non-urban air or from high stacks]: 0.000347507 kg; lognormal variance with pedigree 0.7, pedigree (1,1,5,5,3)
  (same comment as for anode slime from electrorefining of copper, anode)

## Sampling procedure
Literature review and material flow analysis.

## Extrapolations
see Geography, Technology and general comments.
