# treatment of waste paint, sanitary landfill

Dataset: EcoSpold 2, unit process
Geography: RoW
Time period: 1994-01-01 to 2022-12-31
Technology level: current
Classification: ISIC rev.4 ecoinvent: 3821:Treatment and disposal of non-hazardous waste
Classification: EcoSpold01Categories: waste management/sanitary landfill
Tags: Treatment
Scenario: Business-as-Usual
System model: Substitution, consequential, long-term
Generated by: Gabor Doka
Published in: Doka G. 2007
Database: ecoinvent
isCopyrightProtected: true

## General comment
Inventoried waste contains 100% paint (remains); .
waste composition (wet, in ppm): upper heating value 10.86 MJ/kg; lower heating value 10.14 MJ/kg; H2O n.a.; O 290300; H 36288; C 651510; S n.a.; N n.a.; P n.a.; B n.a.; Cl 1600; Br n.a.; F n.a.; I n.a.; Ag n.a.; As 2.5; Ba n.a.; Cd 5.0622; Co 388.23; Cr 1040.7; Cu 59; Hg 0.6; Mn n.a.; Mo 38.619; Ni 15; Pb 15246; Sb n.a.; Se n.a.; Sn 256.78; V n.a.; Zn 3251.5; Be n.a.; Sc n.a.; Sr n.a.; Ti n.a.; Tl n.a.; W n.a.; Si n.a.; Fe n.a.; Ca n.a.; Al n.a.; K n.a.; Mg n.a.; Na n.a.;
Share of carbon in waste that is biogenic 0%.
Overall degradability of waste during 100 years: 1%.
[This dataset was already contained in the ecoinvent database version 2. It was not individually updated during the transfer to ecoinvent version 3. Life Cycle Impact Assessment results may still have changed, as they are affected by changes in the supply chain, i.e. in other datasets. This dataset was generated following the ecoinvent quality guidelines for version 2. It may have been subject to central changes described in the ecoinvent version 3 change report (http://www.ecoinvent.org/database/ecoinvent-version-3/reports-of-changes/), and the results of the central updates were reviewed extensively. The changes added e.g. consistent water flows and other information throughout the database. The documentation of this dataset can be found in the ecoinvent reports of version 2, which are still available via the ecoinvent website. The change report linked above covers all central changes that were made during the conversion process.]

## Included activities end
Waste-specific short-term emissions to air via landfill gas incineration and landfill leachate. Burdens from treatment of short-term leachate (0-100a) in wastewater treatment plant (including WWTP sludge disposal in municipal incinerator). Long-term emissions from landfill to groundwater (after base lining failure).

## Geography
Technology encountered in Switzerland in 2000. Landfill includes base seal, leachate collection system, treatment of leachate in municipal wastewater treatment plant.

## Technology
Swiss municipal sanitary landfill for biogenic or untreated municipal waste ('reactive organic landfill'). Landfill gas and leachate collection system. Recultivation and monitoring for 150 years after closure.

## Reference product
- waste paint: -1 kg; name WP; By-product classification Waste; CPC 39: Wastes or scraps
  EcoSpold01Location=CH
  production volume 1.03099e10 kg
    Estimated value. Global demand of paint is estimated to be 45600000000kg (http://www.freedoniagroup.com/brochure/28xx/2845smwe.pdf, accessed 20151009) of which 55% is paint and 35% is emulsion paint (http://www.psgdover.com/en/mouvex-paint-coatings-market-overview/what-are-paint-a-coatings/defining-paintaccessed, accessed 20151009). 22% is considered hazardous waste and 78% non hazardous waste (http://archive.epa.gov/sectors/web/pdf/paint_quantity_report.pdf, accessed 20151009).
    In the US, of hazardous waste 7.2% is sent to hazardous incineration (http://www3.epa.gov/epawaste/hazard/tsd/td/combustion.htm, accessed 20151009). Of non hazardous waste 12% is sent to incineration (Extrapolated from the US data, according to GDP. The relative GDP of US in 2005 was .274857, compared to the global value of 1. EPA estimates that 12% of annual MSW in US is incinerated for energy recovery http://www.epa.gov/epawaste/nonhaz/municipal/pubs/2012_msw_fs.pdf) 23% is sent to inert material landfill (http://archive.epa.gov/sectors/web/pdf/paint_quantity_report.pdf, accessed 20151009). The rest (65%) is considered to go to sanitary landfill.
    In the EU (from Eurostat municipal waste treatment http://ec.europa.eu/eurostat/web/waste/transboundary-waste-shipments/key-waste-streams/municipal-waste), of hazardous waste 23% is sent to hazardous incineration. Of non hazardous waste 23% is sent to incineration. 37% is considered to be sent to landfilling and it is split between sanitary and inert landfill using the same shares assumed for the US.
    The treatment activities for the global dataset are calculated as the weighted average of US and EU, based on nominal GDP of 2010 (source: United Nations, http://data.un.org/Glossary.aspx?q=GDP+%28current+US%24%29, accessed 20130726 and 20130312). Where EU without CH GDP is 2.80E-01 and US is 0.253094 of the world. Gross domestic product (GDP) at current prices is GDP at prices of the current reporting period. Also known as nominal GDP.
    The assumed treatment are 16% of hazardous waste goes to incineration. For non hazardous, 20% goes to incineration, 12% goes to inert landfill, and 56% goes to sanitary landfill.
  property carbon content, fossil 0.65
    Tab A.5, ecoinvent v2.2 report 13_I. C content has been calculated after data in the tables, and then referred to 1 kg DM
  property heating value, net 19.7 MJ
    LHV is calculated based on the Carbon content of the product. More details can be found on the respective documentation.
  property price 0 EUR2005
    Waste products are assigned a price of zero as they are assumed to require further treatment.
  properties: carbon allocation 0.65 kg, carbon content 0.65, carbon content, non-fossil 0, dry mass 1 kg, water content 0, water in wet mass 0 kg, wet mass 1 kg

## Inputs from technosphere
- cement, unspecified: 1.3445e-8, 2.20627e-8, 8.37885e-8, 1.0419e-9, 2.07078e-9, 3.16587e-9, 8.43795e-7, 2.63003e-9 kg (8 suppliers, which the file names only by identifier); sum of these 9.72e-7 kg; lognormal variance with pedigree 0.802, pedigree (1,1,5,5,1)
  burden from incineration of sludge from wastewater treatment of the short-term leachate (0-100a). uncertainty is calculated from uncertainties in waste composition and transfer coefficients in incinerator and uncertainty of waste decomposition and short-term leaching in sanitary landfill
  EcoSpold01Location=CH
  properties: dry mass 1 kg, wet mass 1 kg
- chemical, inorganic: 8.89e-10 kg; lognormal variance with pedigree 0.912, pedigree (1,1,5,5,1)
  EcoSpold01Location=GLO
  burden from incineration of sludge from wastewater treatment of the short-term leachate (0-100a). uncertainty is calculated from uncertainties in waste composition and transfer coefficients in incinerator and uncertainty of waste decomposition and short-term leaching in sanitary landfill
  properties: carbon content, fossil 0.003, dry mass 1 kg, wet mass 1 kg
  note on carbon content, fossil: This dataset is an unweighted average of 20 inorganic substances (listed in Tab 88.1, ecoinvent v2.2 report 8, part II), being part of the top100 chemicals included in this database. The C-content has also been calculated as an unweighted average of the C content of the substances composing this dataset.
- chemical, organic: 1.45e-8 kg; lognormal variance with pedigree 1.882, pedigree (1,1,5,5,1)
  burden from incineration of sludge from wastewater treatment of the short-term leachate (0-100a). uncertainty is calculated from uncertainties in waste composition and transfer coefficients in incinerator and uncertainty of waste decomposition and short-term leaching in sanitary landfill
  EcoSpold01Location=GLO
  properties: carbon content, fossil 0.628, dry mass 1 kg, heating value, net 19.03 MJ, wet mass 1 kg
  note on carbon content, fossil: This dataset is an unweighted average of 20 organic substances (listed in Tab 88.1, ecoinvent v2.2 report 8, part II), being part of the top100 chemicals included in this database. The C-content has also been calculated as an unweighted average of the C content of the substances composing this dataset.
- electricity, high voltage: 5.64674e-8, 5.64577e-8, 1.25318e-5, 1.05563e-6, 1.58137e-6, 7.18232e-7 kWh (6 suppliers, which the file names only by identifier); sum of these 1.6e-5 kWh; lognormal variance with pedigree 1.192, pedigree (1,1,5,5,1)
  (same comment as for cement, unspecified)
- electricity, low voltage: 2.33689e-6, 0.000140642, 1.56851e-5, 1.68478e-5, 5.87446e-7, 7.90114e-6 kWh (6 suppliers, which the file names only by identifier); sum of these 0.000184 kWh; lognormal variance with pedigree 0.83, pedigree (5,5,5,5,5)
  EcoSpold01Location=CH
  burden from wastewater treatment of the short-term leachate (0-100a). Uncertainty calculated from unertainty of the waste composition of this waste, uncertainty in waste decomposition and short-term leaching in sanitary landfill
  Uncertainty: . Uncertainty calculated from unertainty of the waste composition of this waste, uncertainty in waste decomposition and short-term leaching in sanitary landfill
- heat, central or small-scale, other than natural gas: 3.2524e-5 MJ; lognormal variance with pedigree 0.2106, pedigree (5,5,5,5,5)
  burden from wastewater treatment of the short-term leachate (0-100a). Uncertainty calculated from unertainty of the waste composition of this waste, uncertainty in waste decomposition and short-term leaching in sanitary landfill
  EcoSpold01Location=CH
  Uncertainty: . Uncertainty calculated from unertainty of the waste composition of this waste, uncertainty in waste decomposition and short-term leaching in sanitary landfill
  properties: heating value, net 1 MJ
- heat, district or industrial, natural gas: 5.90645e-6, 3.89255e-5 MJ (2 suppliers, which the file names only by identifier); sum of these 4.4832e-5 MJ; lognormal variance with pedigree 0.2106, pedigree (5,5,5,5,5)
  burden from wastewater treatment of the short-term leachate (0-100a). Uncertainty calculated from unertainty of the waste composition of this waste, uncertainty in waste decomposition and short-term leaching in sanitary landfill
  EcoSpold01Location=RER
  Uncertainty: . Uncertainty calculated from unertainty of the waste composition of this waste, uncertainty in waste decomposition and short-term leaching in sanitary landfill
  properties: heating value, net 1 MJ
- heat, district or industrial, other than natural gas: 9.3337e-5, 1.62983e-7 MJ (2 suppliers, which the file names only by identifier); sum of these 9.35e-5 MJ; lognormal variance with pedigree 0.772, pedigree (1,1,5,5,1)
  (same comment as for cement, unspecified)
  properties: heating value, net 1 MJ
- hydrochloric acid, without water, in 30% solution state: 5.33e-10 kg; lognormal variance with pedigree 0.912, pedigree (1,1,5,5,1)
  EcoSpold01Location=RER
  burden from incineration of sludge from wastewater treatment of the short-term leachate (0-100a). uncertainty is calculated from uncertainties in waste composition and transfer coefficients in incinerator and uncertainty of waste decomposition and short-term leaching in sanitary landfill
  properties: dry mass 1 kg, heating value, net 3.32 MJ, wet mass 1 kg
- iron (III) chloride, without water, in 40% solution state: 1.62e-7 kg; lognormal variance with pedigree 0.912, pedigree (1,1,5,5,1)
  EcoSpold01Location=CH
  burden from incineration of sludge from wastewater treatment of the short-term leachate (0-100a). uncertainty is calculated from uncertainties in waste composition and transfer coefficients in incinerator and uncertainty of waste decomposition and short-term leaching in sanitary landfill
  properties: dry mass 1 kg, wet mass 1 kg
- municipal waste incineration facility: 2.79e-14 unit; lognormal variance with pedigree 0.772, pedigree (1,1,5,5,1)
  EcoSpold01Location=CH
  Burden from incineration of sludge from wastewater treatment of the short-term leachate (0-100a).
- process-specific burdens, municipal waste incineration: 0.000112 kg; lognormal variance with pedigree 0.772, pedigree (1,1,5,5,1)
  Burden from incineration of sludge from wastewater treatment of the short-term leachate (0-100a).
  EcoSpold01Location=CH
- process-specific burdens, residual material landfill: 2.43e-6 kg; lognormal variance with pedigree 0.792, pedigree (1,1,5,5,1)
  (same comment as for cement, unspecified)
- process-specific burdens, sanitary landfill: 1 kg; lognormal variance with pedigree 0.042, pedigree (1,1,5,5,1)
  demands per kilogram waste. uncertainty is heeded in the module
  EcoSpold01Location=CH
- process-specific burdens, slag landfill: 1.07e-6 kg; lognormal variance with pedigree 0.832, pedigree (1,1,5,5,1)
  (same comment as for cement, unspecified)
- residual material landfill: 5.06e-15 unit; lognormal variance with pedigree 0.792, pedigree (1,1,5,5,1)
  (same comment as for iron (III) chloride, without water, in 40% solution state)
- sanitary landfill facility: 5.56e-10 unit; lognormal variance with pedigree 0.042, pedigree (1,1,5,5,1)
  EcoSpold01Location=CH
  demands per kilogram waste. uncertainty is heeded in the module
- sewer grid, 5E9l/year, 110 km: 5.45e-10 km; lognormal variance with pedigree 0.2106, pedigree (5,5,5,5,5)
  (same comment as for heat, central or small-scale, other than natural gas)
- slag landfill: 1.9e-15 unit; lognormal variance with pedigree 0.832, pedigree (1,1,5,5,1)
  (same comment as for iron (III) chloride, without water, in 40% solution state)
- waste cement, hydrated: -2.43e-6 kg; name BP_WS
  (same comment as for iron (III) chloride, without water, in 40% solution state)
  production volume
    Calculated based on the relative production amount of the reference and by products.
  properties: dry mass 1 kg, wet mass 1 kg
- waste graphical paper: -2.89758e-7, -1.04702e-6, -1.02093e-7, -1.89751e-6, -1.88985e-7, -2.53367e-8, -3.52493e-5 kg (7 suppliers, which the file names only by identifier); sum of these -3.88e-5 kg
  EcoSpold01Location=CH
  burden from wastewater treatment of the short-term leachate (0-100a). Uncertainty calculated from unertainty of the waste composition of this waste, uncertainty in waste decomposition and short-term leaching in sanitary landfill
  production volume
    Calculated based on the relative production amount of the reference and by products.
  properties: carbon content, non-fossil 0.454955, dry mass 0.888 kg, heating value, net 14.12 MJ, water content 0.126126, wet mass 1 kg
  note on heating value, net: Value taken from the general comment of the treatment dataset.
- waste plastic, mixture: -2.40943e-8, -4.76812e-6, -1.31588e-7, -1.24955e-7, -3.18588e-7, -5.31601e-8, -3.33795e-5 kg (7 suppliers, which the file names only by identifier); sum of these -3.88e-5 kg
  (same comment as for waste graphical paper)
  production volume
    Calculated based on the relative production amount of the reference and by products.
  properties: carbon content, fossil 0.747344, dry mass 0.847 kg, heating value, net 30.79 MJ, water content 0.180638, wet mass 1 kg
  note on carbon content, fossil: C content in 1 kg DM was calculated using data in Tab A.2, ecoinvent v2.2 report 13_I
- wastewater treatment facility, capacity 5E9l/year: 1.42e-11 unit; lognormal variance with pedigree 0.2106, pedigree (5,5,5,5,5)
  (same comment as for heat, central or small-scale, other than natural gas)

## Emissions to nature
- Arsenic ion [air, non-urban air or from high stacks]: 6.29e-11 kg; lognormal variance with pedigree 2.632, pedigree (1,1,5,5,1)
  burden from direct release or incineration of landfill biogas. Uncertainty calculated from unertainty of the waste composition of this waste, uncertainty in waste decomposition and short-term leaching in sanitary landfill
- Arsenic ion [air, urban air close to ground]: 1.26e-12 kg; lognormal variance with pedigree 2.112, pedigree (1,1,5,5,1)
  Emissions from short-term leachate treatment and incineration of resulting sludge. Uncertainty calculated depending on waste input and uncertainty of transfer coefficents in landfill, wastewater treatment and incineration model.
- Cadmium II [air, non-urban air or from high stacks]: 5.94e-11 kg; lognormal variance with pedigree 2.642, pedigree (1,1,5,5,1)
  (same comment as for Arsenic ion)
- Cadmium II [air, urban air close to ground]: 2.44e-13 kg; lognormal variance with pedigree 2.042, pedigree (1,1,5,5,1)
  (same comment as for Arsenic ion)
- Carbon dioxide, fossil [air, non-urban air or from high stacks]: 0.0163 kg; lognormal variance with pedigree 0.422, pedigree (1,1,5,5,1)
  (same comment as for Arsenic ion)
- Carbon dioxide, fossil [air, urban air close to ground]: 0.000545 kg; lognormal variance with pedigree 0.862, pedigree (1,1,5,5,1)
  (same comment as for Arsenic ion)
- Carbon monoxide, fossil [air, non-urban air or from high stacks]: 9.25e-7 kg; lognormal variance with pedigree 1.062, pedigree (1,1,5,5,1)
  (same comment as for Arsenic ion)
- Carbon monoxide, fossil [air, urban air close to ground]: 3.49e-7 kg; lognormal variance with pedigree 0.932, pedigree (1,1,5,5,1)
  (same comment as for Arsenic ion)
- Chromium III [air, non-urban air or from high stacks]: 2.97e-11 kg; lognormal variance with pedigree 2.702, pedigree (1,1,5,5,1)
  (same comment as for Arsenic ion)
- Chromium III [air, urban air close to ground]: 4.32e-15 kg; lognormal variance with pedigree 1.742, pedigree (1,1,5,5,1)
  (same comment as for Arsenic ion)
- Cobalt II [air, non-urban air or from high stacks]: 3.12e-10 kg; lognormal variance with pedigree 2.412, pedigree (1,1,5,5,1)
  (same comment as for Arsenic ion)
- Cobalt II [air, urban air close to ground]: 1.95e-14 kg; lognormal variance with pedigree 1.442, pedigree (1,1,5,5,1)
  (same comment as for Arsenic ion)
- Copper ion [air, non-urban air or from high stacks]: 8.25e-13 kg; lognormal variance with pedigree 3.172, pedigree (1,1,5,5,1)
  (same comment as for Arsenic ion)
- Copper ion [air, urban air close to ground]: 1.58e-14 kg; lognormal variance with pedigree 2.202, pedigree (1,1,5,5,1)
  (same comment as for Arsenic ion)
- Hydrochloric acid [air, non-urban air or from high stacks]: 5.81e-7 kg; lognormal variance with pedigree 1.422, pedigree (1,1,5,5,1)
  (same comment as for Arsenic ion)
- Lead II [air, non-urban air or from high stacks]: 2.99e-10 kg; lognormal variance with pedigree 2.412, pedigree (1,1,5,5,1)
  (same comment as for Arsenic ion)
- Lead II [air, urban air close to ground]: 2.97e-11 kg; lognormal variance with pedigree 1.442, pedigree (1,1,5,5,1)
  (same comment as for Arsenic ion)
- Mercury II [air, non-urban air or from high stacks]: 1.64e-10 kg; lognormal variance with pedigree 2.502, pedigree (1,1,5,5,1)
  (same comment as for Arsenic ion)
- Mercury II [air, urban air close to ground]: 6.96e-16 kg; lognormal variance with pedigree 2.442, pedigree (1,1,5,5,1)
  (same comment as for Arsenic ion)
- Methane, fossil [air, non-urban air or from high stacks]: 0.0025 kg; lognormal variance with pedigree 0.462, pedigree (1,1,5,5,1)
  (same comment as for Arsenic ion)
- Methane, fossil [air, urban air close to ground]: 1.07e-6 kg; lognormal variance with pedigree 0.912, pedigree (1,1,5,5,1)
  (same comment as for Arsenic ion)
- Molybdenum VI [air, non-urban air or from high stacks]: 1.02e-11 kg; lognormal variance with pedigree 2.862, pedigree (1,1,5,5,1)
  (same comment as for Arsenic ion)
- Molybdenum VI [air, urban air close to ground]: 4.01e-11 kg; lognormal variance with pedigree 1.812, pedigree (1,1,5,5,1)
  (same comment as for Arsenic ion)
- NMVOC, non-methane volatile organic compounds [air, non-urban air or from high stacks]: 1.75e-8 kg; lognormal variance with pedigree 0.462, pedigree (1,1,5,5,1)
  (same comment as for Arsenic ion)
- NMVOC, non-methane volatile organic compounds [air, urban air close to ground]: 4.84e-9 kg; lognormal variance with pedigree 1.032, pedigree (1,1,5,5,1)
  (same comment as for Arsenic ion)
- Nickel II [air, non-urban air or from high stacks]: 2.18e-12 kg; lognormal variance with pedigree 3.062, pedigree (1,1,5,5,1)
  (same comment as for Arsenic ion)
- Nickel II [air, urban air close to ground]: 1.48e-16 kg; lognormal variance with pedigree 2.102, pedigree (1,1,5,5,1)
  (same comment as for Arsenic ion)
- Particulate Matter, < 2.5 um [air, non-urban air or from high stacks]: 3.1e-7 kg; lognormal variance with pedigree 0.722, pedigree (1,1,5,5,1)
  (same comment as for Arsenic ion)
- Tin ion [air, non-urban air or from high stacks]: 3.78e-12 kg; lognormal variance with pedigree 2.972, pedigree (1,1,5,5,1)
  (same comment as for Arsenic ion)
- Tin ion [air, urban air close to ground]: 1.17e-11 kg; lognormal variance with pedigree 1.942, pedigree (1,1,5,5,1)
  (same comment as for Arsenic ion)
- Zinc II [air, non-urban air or from high stacks]: 3.42e-10 kg; lognormal variance with pedigree 2.392, pedigree (1,1,5,5,1)
  (same comment as for Arsenic ion)
- Zinc II [air, urban air close to ground]: 1.74e-11 kg; lognormal variance with pedigree 1.362, pedigree (1,1,5,5,1)
  (same comment as for Arsenic ion)
- Arsenic ion [water, ground-, long-term]: 2.5e-6 kg; lognormal variance with pedigree 1.492, pedigree (1,1,5,5,1)
  Emissions from long-term leachate (>100a) directly from MSW landfill and indirectly via incineration of treatement sludge from leachate treatement. Uncertainty calculated depending on waste input and uncertainty of long-term transfer coefficents in landfill.
- Arsenic ion [water, surface water]: 3.96e-9 kg; lognormal variance with pedigree 2.072, pedigree (1,1,5,5,1)
  (same comment as for Arsenic ion)
- BOD5, Biological Oxygen Demand [water, ground-, long-term]: 0.0428 kg; lognormal variance with pedigree 0.512, pedigree (1,1,5,5,1)
  (same comment as for Arsenic ion)
- BOD5, Biological Oxygen Demand [water, surface water]: 3.77e-5 kg; lognormal variance with pedigree 0.872, pedigree (1,1,5,5,1)
  (same comment as for Arsenic ion)
- COD, Chemical Oxygen Demand [water, ground-, long-term]: 0.181 kg; lognormal variance with pedigree 0.512, pedigree (1,1,5,5,1)
  (same comment as for Arsenic ion)
- COD, Chemical Oxygen Demand [water, surface water]: 0.00012 kg; lognormal variance with pedigree 0.862, pedigree (1,1,5,5,1)
  (same comment as for Arsenic ion)
- Cadmium II [water, ground-, long-term]: 5.05e-6 kg; lognormal variance with pedigree 1.402, pedigree (1,1,5,5,1)
  (same comment as for Arsenic ion)
- Cadmium II [water, surface water]: 4.52e-9 kg; lognormal variance with pedigree 1.982, pedigree (1,1,5,5,1)
  (same comment as for Arsenic ion)
- Chloride [water, ground-, long-term]: 0.00156 kg; lognormal variance with pedigree 0.642, pedigree (1,1,5,5,1)
  (same comment as for Arsenic ion)
- Chloride [water, surface water]: 4.03e-5 kg; lognormal variance with pedigree 0.902, pedigree (1,1,5,5,1)
  Emissions from short-term leachate treatment. Uncertainty calculated depending on waste input and uncertainty of transfer coefficents in landfill and wastewater treatment.
- Chromium III [water, surface water]: 1.86e-10 kg; lognormal variance with pedigree 1.662, pedigree (1,1,5,5,1)
  (same comment as for Arsenic ion)
- Chromium VI [water, ground-, long-term]: 4.72e-6 kg; lognormal variance with pedigree 7.982, pedigree (1,1,5,5,1)
  (same comment as for Arsenic ion)
- Chromium VI [water, surface water]: 6.21e-8 kg; lognormal variance with pedigree 1.632, pedigree (1,1,5,5,1)
  (same comment as for Arsenic ion)
- Cobalt II [water, ground-, long-term]: 0.000388 kg; lognormal variance with pedigree 0.822, pedigree (1,1,5,5,1)
  (same comment as for Arsenic ion)
- Cobalt II [water, surface water]: 6.33e-7 kg; lognormal variance with pedigree 1.332, pedigree (1,1,5,5,1)
  (same comment as for Arsenic ion)
- Copper ion [water, ground-, long-term]: 5.9e-5 kg; lognormal variance with pedigree 1.072, pedigree (1,1,5,5,1)
  (same comment as for Arsenic ion)
- Copper ion [water, surface water]: 7.49e-10 kg; lognormal variance with pedigree 2.122, pedigree (1,1,5,5,1)
  (same comment as for Arsenic ion)
- DOC, Dissolved Organic Carbon [water, ground-, long-term]: 0.165 kg; lognormal variance with pedigree 0.512, pedigree (1,1,5,5,1)
  (same comment as for Arsenic ion)
- DOC, Dissolved Organic Carbon [water, surface water]: 2.91e-5 kg; lognormal variance with pedigree 0.862, pedigree (1,1,5,5,1)
  (same comment as for Arsenic ion)
- Lead II [water, ground-, long-term]: 0.0152 kg; lognormal variance with pedigree 0.362, pedigree (1,1,5,5,1)
  (same comment as for Arsenic ion)
- Lead II [water, surface water]: 9.87e-8 kg; lognormal variance with pedigree 1.392, pedigree (1,1,5,5,1)
  (same comment as for Arsenic ion)
- Mercury II [water, ground-, long-term]: 5.99e-7 kg; lognormal variance with pedigree 1.672, pedigree (1,1,5,5,1)
  (same comment as for Arsenic ion)
- Mercury II [water, surface water]: 1.3e-10 kg; lognormal variance with pedigree 2.382, pedigree (1,1,5,5,1)
  (same comment as for Arsenic ion)
- Molybdenum VI [water, ground-, long-term]: 1.53e-5 kg; lognormal variance with pedigree 1.342, pedigree (1,1,5,5,1)
  (same comment as for Arsenic ion)
- Molybdenum VI [water, surface water]: 2.41e-8 kg; lognormal variance with pedigree 1.782, pedigree (1,1,5,5,1)
  (same comment as for Arsenic ion)
- Nickel II [water, ground-, long-term]: 1.5e-5 kg; lognormal variance with pedigree 1.252, pedigree (1,1,5,5,1)
  (same comment as for Arsenic ion)
- Nickel II [water, surface water]: 5.29e-9 kg; lognormal variance with pedigree 1.982, pedigree (1,1,5,5,1)
  (same comment as for Arsenic ion)
- TOC, Total Organic Carbon [water, ground-, long-term]: 0.165 kg; lognormal variance with pedigree 0.512, pedigree (1,1,5,5,1)
  (same comment as for Arsenic ion)
- TOC, Total Organic Carbon [water, surface water]: 3.03e-5 kg; lognormal variance with pedigree 0.862, pedigree (1,1,5,5,1)
  (same comment as for Arsenic ion)
- Tin ion [water, ground-, long-term]: 0.000257 kg; lognormal variance with pedigree 0.882, pedigree (1,1,5,5,1)
  (same comment as for Arsenic ion)
- Tin ion [water, surface water]: 6.33e-9 kg; lognormal variance with pedigree 1.902, pedigree (1,1,5,5,1)
  (same comment as for Arsenic ion)
- Zinc II [water, ground-, long-term]: 0.00268 kg; lognormal variance with pedigree 0.552, pedigree (1,1,5,5,1)
  (same comment as for Arsenic ion)
- Zinc II [water, surface water]: 4.76e-7 kg; lognormal variance with pedigree 1.302, pedigree (1,1,5,5,1)
  (same comment as for Arsenic ion)

## Sampling procedure
Landfill model based on observed leachate concentrations in literature. Extrapolated to 60'000 years heeding chemical characteristics. Initial waste composition from various literature sources.

## Extrapolations
This dataset has been copied from an original dataset covering the geography CH. The uncertainty has been adjusted accordingly.

## Review by Niels Jungbluth 2003-07-21
Passed. Calculation for standard deviation 95 of, i.e., infrastructure,
land occupation, transport services or other services can differ from
standard Pedigree approach used in this project and figures obtained by
this procedure.

## Review by Tereza Levova 2015-03-27
Real production volume added for the ecoinvent v3.2. release.

## Review by Emilia Moreno Ruiz 2015-10-16
PV adjusted
