# copper production, cathode, solvent extraction and electrowinning process

Dataset: EcoSpold 2, unit process
Geography: GLO
Time period: 1994-01-01 to 2022-12-31
Technology level: current
Classification: ISIC rev.4 ecoinvent: 2420:Manufacture of basic precious and other non-ferrous metals
Tags: ConvertedDataset
Scenario: Business-as-Usual
System model: Substitution, consequential, long-term
Share of production covered: 100 %
Generated by: [System]
Published in: Althaus H.-J. 2000
Database: ecoinvent
isCopyrightProtected: true

## Included activities start
Mining process, starting from copper ore, in ground.

## Included activities end
This dataset ends with the refining of copper.

The dataset includes the grounding of the ore, the gravity concentration of the ore, the pretreatment of the ore prior to hydrometallurgy, the dump leaching step for copper recovery, the solution cleaning step, and the separation step. Also included are the disposal of overburden & tailings, and the Production infrastructure used directly for mining.

## Geography
This module is valid for an average world-wide process.

## Technology
Oxide ores and supergene sulphide ores (i.e. ores not containing iron) can be recovered most easily by hydro-metallurgical techniques, such as SX-EW. The general steps of mining and refining are identical to those of copper mine operation and primary copper production, respectively. The difference lies in that the beneficiation and smelting stages are by-passed and substituted with a leaching stage followed by cementation or electro-winning.

## Parameters
- fraction, process water, to air: 0.15 dimensionless; name fraction_PW_to_air; lognormal variance with pedigree 0.092025, pedigree (4,4,3,2,4)
  Literature value. In case when no industry/process specific data are available, default evaporation fraction value is used. This value is 15% and is based on literature (Statistics Canada, 2007 & Shaffer, K.H., 2008, Consumptive water use in the Great Lakes Basin, USGS & Shiklomanov, 2003, World Water Resources at the Beginning of the 21st Century) and has been approved by an expert.

## Reference product
- copper, cathode: 1 kg; name RP_amount; source Krauss U. 1999; By-product classification allocatable product; CPC 41413: Refined copper and copper alloys, unwrought; master alloys of copper; CAS 7440-50-8
  Before end-use copper is manufactured into semi fabricated products, such as shapes and ingots (known as “semis”). These manufacturing processes are subdivided into hot working, cold working and, if necessary, process annealing.
  Few of the semis are ready for use as such. They more typically travel to first-stage manufacturers, who make metal rods, wire, and casting, and then to component manufacturers who produce such things as motors, valves, and insulated cables
  The components in turn are incorporated by final-stage manufacturers into a variety of finished products - automobiles, commercial buildings, residential housing, and so forth. These uses account for about 79% of the world-wide consumption of copper.
  Literature value.
  production volume 4.03e9 kg
    Source: USGS Minerals Yearbook 2015. Available from: https://www.usgs.gov/centers/nmic/copper-statistics-and-information (downloaded 12 July 2019), Table 22 (grand total, primary, electrowon).
  property price 3.57105 EUR2005
    Price calculated as 5-year market average (2015-2019; USD/kg; USGS [2020]) and converted to EUR2005 (USD2019/EUR2005 exchange rate: 0.62; Official Data Foundation [2020] and Macrotrends [2020]).
    References:
    Official Data Foundation (2020). Inflation Calculator [Online]. Available from: https://www.officialdata.org/us/inflation/2005?endYear=2019&amount=1 [Accessed 28/07/2020]
    USGS (2020). Mineral Commodity Summaries 2020 [Online]. Available from: https://pubs.usgs.gov/periodicals/mcs2020/mcs2020.pdf [Accessed 28/07/2020]
    Macrotrends (2020). Euro Dollar Exchange Rate (EUR USD) - Historical Chart [Online]. Available from: https://www.macrotrends.net/2548/euro-dollar-exchange-rate-historical-chart [Accessed 28/07/2020]
  properties: carbon allocation 0 kg, carbon content 0, carbon content, fossil 0, carbon content, non-fossil 0, dry mass 1 kg, water content 0, water in wet mass 0 kg, wet mass 1 kg

## Inputs from technosphere
- ammonia, anhydrous, liquid: 4.25761e-5, 8.6625e-6, 8.2649e-5, 0.000318363, 3.87246e-5, 0.000182912, 2.56438e-5, 0.000916111, 8.43584e-5 kg (9 suppliers, which the file names only by identifier); sum of these 0.0017 kg; source Hilbrans H. 1999; lognormal variance with pedigree 0.0408, pedigree (2,2,5,3,1)
  Proxy: 'ammonia, liquid' is used as a proxy for leaching agents.
  Estimation from dataset author.
  properties: dry mass 1 kg, wet mass 1 kg
- blasting: 0.277 kg; source Krauss U. 1999; lognormal variance with pedigree 0.0587, pedigree (2,2,5,1,3)
  Proxy: Data corresponds to 'copper mine operation' process.
- chemical factory, organics: 4e-10 unit; lognormal variance with pedigree 0.3601, pedigree (3,2,5,1,3)
  Proxy: 'chemical factory, organics' is used as a proxy for leaching infrastructure.
  Estimation from dataset author.
- conveyor belt: 2.1e-5 m; source Classen M. 2008; lognormal variance with pedigree 0.1282, pedigree (4,2,5,3,4)
  Estimated value: Crushing and grinding operations of the material have been estimated with additional energy and mechanical wear (milling equipment) as compared to the conventional copper mine operation dataset.
  Proxy: Base data corresponds to 'copper mine operation' process.
- diesel, burned in building machine: 8.31 MJ; source Krauss U. 1999; lognormal variance with pedigree 0.0587, pedigree (2,2,5,1,3)
  Proxy: Data corresponds to 'copper mine operation' process.
  properties: heating value, net 1 MJ
- electricity, high voltage: 5.15 kWh; source Krauss U. 1999; lognormal variance with pedigree 0.1282, pedigree (4,2,5,3,4)
  Estimated value: Non mining step electricity consumption was estimated to be 40% from grid and 60% from hydropower.
  Estimated value: Crushing and grinding operations of the material have been estimated with additional energy and mechanical wear (milling equipment) as compared to the conventional copper mine operation dataset.
  Proxy: Base mining data corresponds to 'copper mine operation' process.
- electricity, high voltage: 1.15 kWh; source Krauss U. 1999; lognormal variance with pedigree 0.0408, pedigree (2,2,5,3,1)
  Literature value.
- electricity, medium voltage: 2.28 kWh; source Krauss U. 1999; lognormal variance with pedigree 0.1282, pedigree (4,2,5,3,4)
  (same comment as for electricity, high voltage)
- mine infrastructure, open cast, non-ferrous metal: 1.38e-8 unit; source Classen M. 2008; lognormal variance with pedigree 0.3601, pedigree (3,2,5,1,3)
  (same comment as for conveyor belt)
- steel, chromium steel 18/8, hot rolled: 0.191 kg; source Classen M. 2008; lognormal variance with pedigree 0.0888, pedigree (4,2,5,3,4)
  (same comment as for conveyor belt)
  properties: carbon content, fossil 0.0008, dry mass 1 kg, wet mass 1 kg
  note on carbon content, fossil: Stainless steel model is the grade 304 steel (18/8 stainless, 18% chromium 8% nickel; max. 0.08% C)
- sulfidic tailings, from copper mine operation: -61.3521, -17.1007, -59.7496, -146.283, -112.677, -26.7843, -25.6397, -29.0736, -20.1912, -34.1099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 kg (11 suppliers, which the file names only by identifier); sum of these -554 kg; source Krauss U. 1999; lognormal variance with pedigree 0.0009, pedigree (2,2,2,1,1)
  Proxy: Data corresponds to 'copper mine operation' process.
  production volume
    Calculated from the production volume of copper in proportion to the respective output amounts.
  properties: aluminium content 0.015758, calcium content 0.0045119, carbon content, fossil 0.0087785, dry mass 0.7 kg, iron content 0.014771, magnesium content 0.0022944, oxygen content 0.88899, potassium content 0.0026178, silicon content 0.055278, sodium content 0.0015148, water content 0.428571, wet mass 1 kg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
- sulfuric acid: -0.330146, -1.36985 kg (2 suppliers, which the file names only by identifier); sum of these -1.7 kg; lognormal variance with pedigree 0.0009, pedigree (2,2,2,1,1)
  production volume
    Calculated from production volume of reference product using the relative outputs.
  properties: dry mass 1 kg, price 0.063 EUR2005, wet mass 1 kg

## Inputs from nature
- Copper [natural resource, in ground]: 1.43 kg; source Krauss U. 1999; lognormal variance with pedigree 0.0407, pedigree (2,2,5,1,1)
  0.99% Cu in sulfide; 0.36% Cu and 82 ppm Mo in ore; Literature value
- Occupation, mineral extraction site [natural resource, land]: 0.0145 m2*year; source Martens P. N. 2002; lognormal variance with pedigree 0.1001, pedigree (3,2,5,1,3)
  Literature value.
- Transformation, from unspecified [natural resource, land]: 0.000482 m2; source Martens P. N. 2002; lognormal variance with pedigree 0.1801, pedigree (3,2,5,1,3)
  Literature value
- Transformation, to mineral extraction site [natural resource, land]: 0.000482 m2; source Martens P. N. 2002; lognormal variance with pedigree 0.1801, pedigree (3,2,5,1,3)
  Literature value
- Water, river [natural resource, in water]: 0.17 m3; name water_river_input; source Krauss U. 1999; lognormal variance with pedigree 0.0407, pedigree (2,2,5,1,1)
  Literature value.

## Emissions to nature
- Water [air, unspecified]: 0.0255 m3; name water_to_air_unspecified; = (water_river_input*fraction_PW_to_air); lognormal variance with pedigree 0.0807, pedigree (2,2,5,1,1)
  Calculated value based on literature values and expert opinion. See comments in the parametres' comment field.
  property fraction, origin: fresh water 1; name fraction_origin_fresh_water
  property fraction, origin: salt water 0; name fraction_origin_salt_water
  property fraction, origin: unspecified 0; name fraction_origin_unspecified
- Water [water, unspecified]: 0.1445 m3; name water_to_water_unspecified; = water_river_input*(1-fraction_PW_to_air); lognormal variance with pedigree 0.0807, pedigree (2,2,5,1,1)
  (same comment as for Water)
  property carbon content, fossil 0; name C_content_fossil
  property carbon content, non-fossil 0; name C_content_non_fossil
  property fraction, origin: fresh water 1; name fraction_origin_fresh_water_Ww
  property fraction, origin: salt water 0; name fraction_origin_salt_water_Ww
  property fraction, origin: unspecified 0; name fraction_origin_unspecified_Ww
  property water in wet mass 1000 kg; name WWM

## Sampling procedure
literature
