# treatment of spent solvent mixture, hazardous waste incineration, with energy recovery

Dataset: EcoSpold 2, unit process
Geography: Europe without Switzerland
Time period: 1997-01-01 to 2022-12-31
Technology level: current
Classification: ISIC rev.4 ecoinvent: 3822:Treatment and disposal of hazardous waste
Synonyms: waste solvents mixture from chemical production
Tags: Treatment
Scenario: Business-as-Usual
System model: Substitution, consequential, long-term
Share of production covered: 39 %
Generated by: [System]
Database: ecoinvent
isCopyrightProtected: true

## General comment
Inventoried waste contains 100% waste solvents mixture; . waste composition (wet, in ppm): upper heating value 23.68 MJ/kg; lower heating value 21.7 MJ/kg; H2O 165000; O 200000; H 81660; C 477000; S 6420; N 10360; P 1000; B n.a.; Cl 24448; Br 2505.2; F 44.921; I 100.24; Ag n.a.; As n.a.; Ba n.a.; Cd n.a.; Co 4.1029; Cr n.a.; Cu 5.1445; Hg n.a.; Mn n.a.; Mo n.a.; Ni 4.2554; Pb n.a.; Sb n.a.; Se n.a.; Sn n.a.; V n.a.; Zn 41.844; Be n.a.; Sc n.a.; Sr n.a.; Ti n.a.; Tl n.a.; W n.a.; Si 31321; Fe 84.652; Ca n.a.; Al n.a.; K n.a.; Mg n.a.; Na n.a.; Share of carbon in waste that is biogenic 0%. Net energy produced in HWI: 17.11MJ/kg thermal energy and 1.27MJ/kg electric energy. Allocation of energy production: no substitution or expansion. 100% of burden allocated to waste disposal function of HWI. One kg of this waste produces 0.07563 kg of residues, which are landfilled. Additional solidification with 0.03025 kg of cement.

## Included activities end
waste-specific air and water emissions from incineration, auxiliary material consumption for flue gas cleaning. Short-term emissions to river water and long-term emissions to ground water from residual material landfill (from solidified fly ashes and scrubber slugde). Process energy demands for HWI.

## Technology
Swiss HWI plant in 2000 with wet flue gas scrubber and low-dust SCR DeNOx facility. Gross thermal efficiency 74.4% and gross electric efficiency 10%.

## Time period
Transfer coefficients for modern Swiss MSWI. Emission speciation based on early 90ies data.

## Reference product
- spent solvent mixture: -1 kg; name RP; By-product classification Waste; CPC 39950: Wastes from chemical or allied industries
  production volume 4.81722e9 kg
    Literature value. Estimated. Annual production volume of solvents is extrapolated from the data for Switzerland, based on the GDP in 2010. The relative GDP of Switzerland in 2005 was 0.0087 and EU without Switzerland is 0.2805 (world GDP is considered to be 1). Source: United Nations, http://data.un.org/Glossary.aspx?q=GDP+%28current+US%24%29, accessed 20130726 and 20130312). Gross domestic product (GDP) at current prices is GDP at prices of the current reporting period. Also known as nominal GDP. According to Capello et al. (2005), about 250’000 tonnes of solvents are used per annum in Switzerland. Capello, C. (2006). Environmental assessment of waste-solvent treatment in the Swiss chemical industry. ETH. According to Eurostat (for EU 28 in 2012) 60% of solvents were treated with incineration. References: <http://www.sust-chem.ethz.ch/tools/ecosolvent/analysis_chem_life_cycle> (Accessed 23-03-2015). Eurostat Incineration data “Incineration of waste, by country, year, treatment type, waste category and hazardousness, in tonnes <http://appsso.eurostat.ec.europa.eu/nui/show.do?query=BOOKMARK_DS-052688_QID_5F46D939_UID_-3F171EB0&layout=TIME,C,X,0;GEO,L,Y,0;UNIT,L,Z,0;HAZARD,L,Z,1;WASTE,L,Z,2;WST_OPER,L,Z,3;INDICATORS,C,Z,4;&zSelection=DS-052688INDICATORS,OBS_FLAG;DS-052688UNIT,T;DS-052688WASTE,TOTAL;DS-052688WST_OPER,RCV_E;DS-052688HAZARD,TOTAL;&rankName1=WST-OPER_1_2_0_0&rankName2=HAZARD_1_2_-1_2&rankName3=WASTE_1_2_-1_2&rankName4=INDICATORS_1_2_-1_2&rankName5=UNIT_1_2_-1_2&rankName6=TIME_1_0_0_0&rankName7=GEO_1_2_0_1&sortC=ASC_-1_FIRST&rStp=&cStp=&rDCh=&cDCh=&rDM=true&cDM=true&footnes=false&empty=false&wai=false&time_mode=NONE&lang=EN&cfo=%23%23%23%2C%23%23%23.%23%23%23>”. Retrieved from <http://ec.europa.eu/eurostat/web/waste/waste-generation-and-management/management/incineration>, accessed 8th July 2016.
  property carbon content, fossil 0.571257
    Tab A.7, ecoinvent v2.2 report 13_I. C content has been calculated after data in the tables, and then referred to 1 kg DM
  property heating value, net 21.7 MJ
    Value taken from the general comment of the treatment dataset.
  property price 0 EUR2005
    Waste products are assigned a price of zero as they are assumed to require further treatment.
  properties: carbon allocation 0.477 kg, carbon content 0.571257, carbon content, non-fossil 0, dry mass 0.835 kg, water content 0.197605, water in wet mass 0.165 kg, wet mass 1 kg

## Inputs from technosphere
- ammonia, anhydrous, liquid: 0.00037782 kg; lognormal variance with pedigree 0.892, pedigree (1,1,5,5,1)
  uncertainty calculated from uncertainty in average DeNOx input, uncertainty in the share of thermal NOx, uncertainty of nitrogen content in average municipal waste and the unertainty in nitrogen content in *this* waste.
  properties: dry mass 1 kg, wet mass 1 kg
- calcium chloride: 0.0034676 kg; lognormal variance with pedigree 0.742, pedigree (1,1,5,5,1)
  uncertainty calculated from uncertainty in average auxiliary material input, and the unertainty of the waste composition of this waste
  properties: dry mass 1 kg, wet mass 1 kg
- cement, unspecified: 0.030252 kg; lognormal variance with pedigree 0.112, pedigree (1,1,5,5,1)
  Cement for solidification of landfilled residual material. Uncertainty calculated from unertainty of the waste composition of this waste, of transfer coefficients in the incinerator and of the solidification recipe.
  properties: dry mass 1 kg, wet mass 1 kg
- chemical, inorganic: 0.00027895 kg; lognormal variance with pedigree 0.152, pedigree (1,1,5,5,1)
  Proxy for Polyelectrolyte. uncertainty calculated from uncertainty in average auxiliary material input, and the unertainty of the waste composition of this waste
  properties: carbon content, fossil 0.003, dry mass 1 kg, wet mass 1 kg
  note on carbon content, fossil: This dataset is an unweighted average of 20 inorganic substances (listed in Tab 88.1, ecoinvent v2.2 report 8, part II), being part of the top100 chemicals included in this database. The C-content has also been calculated as an unweighted average of the C content of the substances composing this dataset.
- chromium: 3.0278e-7 kg; lognormal variance with pedigree 1.272, pedigree (1,1,5,5,1)
  Proxy for vanadium pentoxide V2O5 in SCR catalyst. uncertainty calculated from uncertainty in average DeNOx input, uncertainty in the share of thermal NOx, uncertainty of nitrogen content in average municipal waste and the unertainty in nitrogen content in *this* waste.
  properties: dry mass 1 kg, wet mass 1 kg
- electricity, medium voltage: -0.352778 kWh; name BP3; lognormal variance with pedigree 0.122, pedigree (1,1,1,5,1)
  production volume
    Calculated based on the production volume of the reference product.
  properties: price 0.1 EUR2005
- hazardous waste incineration facility: 1.25e-9 unit; lognormal variance with pedigree 0.042, pedigree (1,1,5,5,1)
  demands per kilogram waste. uncertainty is heeded in the module
- heat, central or small-scale, other than natural gas: 1.222 MJ; lognormal variance with pedigree 1.412, pedigree (1,1,5,5,1)
  Uncertainty dependent on total energy required and heating value present, using experimental GSd for substraction from uc=A*GSDa^2-B
  properties: heating value, net 1 MJ
- heat, district or industrial, natural gas: 0.184428 MJ; lognormal variance with pedigree 0.992, pedigree (1,1,5,5,1)
  (same comment as for ammonia, anhydrous, liquid)
  properties: heating value, net 1 MJ
- heat, district or industrial, other than natural gas: -17.11 MJ; name BP2; lognormal variance with pedigree 0.122, pedigree (1,1,1,5,1)
  production volume
    Calculated based on the production volume of the reference product.
  property corresponding fuel use, propane, furnace >100kW 0 MJ; name fuel_use
  properties: heating value, net 1 MJ, price 0.0106 EUR2005
  note on corresponding fuel use, propane, furnace >100kW: Lower heating value of the fuel input related to the heat/electricity output, taken directly from ecoinvent v3.0 dataset "heat production, natural gas, at industrial furnace >100kW, GLO 2000".
- hydrochloric acid, without water, in 30% solution state: 0.00016737 kg; lognormal variance with pedigree 0.152, pedigree (1,1,5,5,1)
  (same comment as for calcium chloride)
  properties: dry mass 1 kg, heating value, net 3.32 MJ, wet mass 1 kg
- hydrogen peroxide, without water, in 50% solution state: 2.8873e-5 kg; lognormal variance with pedigree 0.492, pedigree (1,1,5,5,1)
  (same comment as for calcium chloride)
  properties: dry mass 1 kg, heating value, net 7.13 MJ, wet mass 1 kg
- iron (III) chloride, without water, in 40% solution state: 3.2063e-5 kg; lognormal variance with pedigree 0.822, pedigree (1,1,5,5,1)
  (same comment as for calcium chloride)
  properties: dry mass 1 kg, wet mass 1 kg
- process-specific burdens, hazardous waste incineration plant: 1 kg; lognormal variance with pedigree 0.042, pedigree (1,1,5,5,1)
  demands per kilogram waste. uncertainty is heeded in the module
- process-specific burdens, residual material landfill: 0.07563 kg; lognormal variance with pedigree 0.102, pedigree (1,1,5,5,1)
  uncertainty is calculated from uncertainties in waste composition and transfer coefficients in incinerator;activityLink introduced to establish a direct link to the corresponding regional supply of this product
- quicklime, milled, packed: 0.0062205 kg; lognormal variance with pedigree 0.222, pedigree (1,1,5,5,1)
  (same comment as for calcium chloride)
  properties: dry mass 0.99 kg, water content 0.010101, wet mass 1 kg
- residual material landfill: 1.5756e-10 unit; lognormal variance with pedigree 0.102, pedigree (1,1,5,5,1)
  uncertainty is calculated from uncertainties in waste composition and transfer coefficients in incinerator
- sodium hydroxide, without water, in 50% solution state: 0.046084 kg; lognormal variance with pedigree 0.212, pedigree (1,1,5,5,1)
  (same comment as for calcium chloride)
  properties: dry mass 1 kg, heating value, net 3.03 MJ, wet mass 1 kg
- titanium dioxide: 1.4836e-5 kg; lognormal variance with pedigree 1.272, pedigree (1,1,5,5,1)
  (same comment as for ammonia, anhydrous, liquid)
  properties: dry mass 1 kg, wet mass 1 kg
- waste cement, hydrated: -0.07563 kg; name BP1; lognormal variance with pedigree 0.072, pedigree (1,1,1,5,1)
  Hydrated cement for solidification of landfilled residual material. Uncertainty calculated from unertainty of the waste composition of this waste and transfer coefficients in the incinerator and of the solidification recipe.
  production volume
    Calculated from the production volume of spent solvent mixture, 16.5% water in proportion to the respective output amounts.
  properties: dry mass 1 kg, wet mass 1 kg

## Emissions to nature
- Ammonia [air, urban air close to ground]: 1.0246e-5 kg; lognormal variance with pedigree 0.932, pedigree (1,1,5,5,1)
  uncertainty calculated from uncertainty in average N-emissions, uncertainty in the share of thermal NOx, uncertainty of nitrogen content in average municipal waste and the unertainty in nitrogen content in *this* waste.
- Bromine [air, urban air close to ground]: 5.0105e-7 kg; lognormal variance with pedigree 0.612, pedigree (1,1,5,5,1)
  (same comment as for residual material landfill)
- Carbon dioxide, fossil [air, urban air close to ground]: 1.7297 kg; lognormal variance with pedigree 0.062, pedigree (1,1,5,5,1)
  calculated from uncertainty in carbon in waste and transfer coefficients
- Carbon monoxide, fossil [air, urban air close to ground]: 1.2076e-5 kg; lognormal variance with pedigree 0.712, pedigree (1,4,5,5,3)
  1 plant for waste solvent incineration in Switzerland
- Cobalt II [air, urban air close to ground]: 2.872e-9 kg; lognormal variance with pedigree 1.452, pedigree (1,1,5,5,1)
  (same comment as for residual material landfill)
- Copper ion [air, urban air close to ground]: 3.6011e-9 kg; lognormal variance with pedigree 1.422, pedigree (1,1,5,5,1)
  (same comment as for residual material landfill)
- Cyanide [air, urban air close to ground]: 9.2214e-6 kg; lognormal variance with pedigree 1.02, pedigree (5,5,5,5,5)
  uncertainty calculated from uncertainty for proxy (from MSWI), uncertainty in average N-emissions, uncertainty in the share of thermal NOx, uncertainty of nitrogen content in average municipal waste and the unertainty in nitrogen content in *this* waste.
- Dinitrogen monoxide [air, urban air close to ground]: 3.6886e-5 kg; lognormal variance with pedigree 1.02, pedigree (5,5,5,5,5)
  (same comment as for Cyanide)
- Hydrochloric acid [air, urban air close to ground]: 7.5414e-6 kg; lognormal variance with pedigree 0.332, pedigree (1,1,5,5,1)
  (same comment as for residual material landfill)
- Hydrogen fluoride [air, urban air close to ground]: 1.1303e-8 kg; lognormal variance with pedigree 1.142, pedigree (1,1,5,5,1)
  (same comment as for residual material landfill)
- Iodine [air, urban air close to ground]: 2.0048e-8 kg; lognormal variance with pedigree 1.032, pedigree (1,1,5,5,1)
  (same comment as for residual material landfill)
- Iron ion [air, urban air close to ground]: 5.9256e-8 kg; lognormal variance with pedigree 1.052, pedigree (1,1,5,5,1)
  (same comment as for residual material landfill)
- Nickel II [air, urban air close to ground]: 2.9788e-9 kg; lognormal variance with pedigree 1.442, pedigree (1,1,5,5,1)
  (same comment as for residual material landfill)
- Nitrogen oxides [air, urban air close to ground]: 0.0002664 kg; lognormal variance with pedigree 0.932, pedigree (1,1,5,5,1)
  (same comment as for Ammonia)
- Phosphorus [air, urban air close to ground]: 7e-7 kg; lognormal variance with pedigree 0.722, pedigree (1,1,5,5,1)
  (same comment as for residual material landfill)
- Silicon [air, urban air close to ground]: 7.2917e-5 kg; lognormal variance with pedigree 0.292, pedigree (1,1,5,5,1)
  (same comment as for residual material landfill)
- Sulfur dioxide [air, urban air close to ground]: 7.704e-6 kg; lognormal variance with pedigree 0.482, pedigree (1,1,5,5,1)
  (same comment as for residual material landfill)
- Zinc II [air, urban air close to ground]: 2.9291e-8 kg; lognormal variance with pedigree 1.142, pedigree (1,1,5,5,1)
  (same comment as for residual material landfill)
- BOD5, Biological Oxygen Demand [water, ground-, long-term]: 0.0077498 kg; lognormal variance with pedigree 0.112, pedigree (1,1,5,5,1)
  Long-term emissions from landfilling of incineration residues. uncertainty is calculated from uncertainties in waste composition and transfer coefficients in incinerator and landfills.
- BOD5, Biological Oxygen Demand [water, surface water]: 2.3968e-5 kg; lognormal variance with pedigree 0.352, pedigree (1,1,5,5,1)
  uncertainty is calculated from uncertainties in waste composition and transfer coefficients in incinerator and landfills
- Bromine [water, ground-, long-term]: 8.3772e-7 kg; lognormal variance with pedigree 0.612, pedigree (1,1,5,5,1)
  (same comment as for BOD5, Biological Oxygen Demand)
- Bromine [water, surface water]: 0.0025039 kg; lognormal variance with pedigree 0.582, pedigree (1,1,5,5,1)
  (same comment as for BOD5, Biological Oxygen Demand)
- COD, Chemical Oxygen Demand [water, ground-, long-term]: 0.0077498 kg; lognormal variance with pedigree 0.112, pedigree (1,1,5,5,1)
  (same comment as for BOD5, Biological Oxygen Demand)
- COD, Chemical Oxygen Demand [water, surface water]: 2.3968e-5 kg; lognormal variance with pedigree 0.352, pedigree (1,1,5,5,1)
  (same comment as for BOD5, Biological Oxygen Demand)
- Chloride [water, ground-, long-term]: 2.9675e-5 kg; lognormal variance with pedigree 0.332, pedigree (1,1,5,5,1)
  (same comment as for BOD5, Biological Oxygen Demand)
- Chloride [water, surface water]: 0.024411 kg; lognormal variance with pedigree 0.302, pedigree (1,1,5,5,1)
  (same comment as for BOD5, Biological Oxygen Demand)
- Cobalt II [water, surface water]: 4.1e-6 kg; lognormal variance with pedigree 1.432, pedigree (1,1,5,5,1)
  (same comment as for BOD5, Biological Oxygen Demand)
- Copper ion [water, ground-, long-term]: 1.894e-7 kg; lognormal variance with pedigree 4.052, pedigree (1,1,5,5,1)
  (same comment as for BOD5, Biological Oxygen Demand)
- Copper ion [water, surface water]: 2.2102e-7 kg; lognormal variance with pedigree 1.402, pedigree (1,1,5,5,1)
  (same comment as for BOD5, Biological Oxygen Demand)
- DOC, Dissolved Organic Carbon [water, ground-, long-term]: 0.0033905 kg; lognormal variance with pedigree 0.112, pedigree (1,1,5,5,1)
  (same comment as for BOD5, Biological Oxygen Demand)
- DOC, Dissolved Organic Carbon [water, surface water]: 1.0486e-5 kg; lognormal variance with pedigree 0.352, pedigree (1,1,5,5,1)
  (same comment as for BOD5, Biological Oxygen Demand)
- Fluoride [water, ground-, long-term]: 7.2227e-8 kg; lognormal variance with pedigree 1.132, pedigree (1,1,5,5,1)
  (same comment as for BOD5, Biological Oxygen Demand)
- Fluoride [water, surface water]: 4.4838e-5 kg; lognormal variance with pedigree 1.112, pedigree (1,1,5,5,1)
  (same comment as for BOD5, Biological Oxygen Demand)
- Iodide [water, ground-, long-term]: 2.105e-14 kg; lognormal variance with pedigree 1.042, pedigree (1,1,5,5,1)
  (same comment as for BOD5, Biological Oxygen Demand)
- Iodide [water, surface water]: 0.00010022 kg; lognormal variance with pedigree 1.002, pedigree (1,1,5,5,1)
  (same comment as for BOD5, Biological Oxygen Demand)
- Iron ion [water, ground-, long-term]: 8.3157e-8 kg; lognormal variance with pedigree 8.042, pedigree (1,1,5,5,1)
  (same comment as for BOD5, Biological Oxygen Demand)
- Iron ion [water, surface water]: 6.8001e-5 kg; lognormal variance with pedigree 1.022, pedigree (1,1,5,5,1)
  (same comment as for BOD5, Biological Oxygen Demand)
- Nickel II [water, ground-, long-term]: 1.2245e-6 kg; lognormal variance with pedigree 1.682, pedigree (1,1,5,5,1)
  (same comment as for BOD5, Biological Oxygen Demand)
- Nickel II [water, surface water]: 8.7227e-7 kg; lognormal variance with pedigree 1.422, pedigree (1,1,5,5,1)
  (same comment as for BOD5, Biological Oxygen Demand)
- Nitrate [water, ground-, long-term]: 0.00037216 kg; lognormal variance with pedigree 0.412, pedigree (1,1,5,5,1)
  (same comment as for BOD5, Biological Oxygen Demand)
- Nitrate [water, surface water]: 0.00013252 kg; lognormal variance with pedigree 0.302, pedigree (1,1,5,5,1)
  (same comment as for BOD5, Biological Oxygen Demand)
- Phosphate [water, ground-, long-term]: 0.00067405 kg; lognormal variance with pedigree 1.262, pedigree (1,1,5,5,1)
  (same comment as for BOD5, Biological Oxygen Demand)
- Phosphate [water, surface water]: 4.8012e-5 kg; lognormal variance with pedigree 0.672, pedigree (1,1,5,5,1)
  (same comment as for BOD5, Biological Oxygen Demand)
- Silicon [water, ground-, long-term]: 0.031178 kg; lognormal variance with pedigree 0.282, pedigree (1,1,5,5,1)
  (same comment as for BOD5, Biological Oxygen Demand)
- Silicon [water, surface water]: 7.0276e-5 kg; lognormal variance with pedigree 0.832, pedigree (1,1,5,5,1)
  (same comment as for BOD5, Biological Oxygen Demand)
- Sulfate [water, ground-, long-term]: 0.00073589 kg; lognormal variance with pedigree 0.472, pedigree (1,1,5,5,1)
  (same comment as for BOD5, Biological Oxygen Demand)
- Sulfate [water, surface water]: 0.018513 kg; lognormal variance with pedigree 0.462, pedigree (1,1,5,5,1)
  (same comment as for BOD5, Biological Oxygen Demand)
- TOC, Total Organic Carbon [water, ground-, long-term]: 0.0033905 kg; lognormal variance with pedigree 0.112, pedigree (1,1,5,5,1)
  (same comment as for BOD5, Biological Oxygen Demand)
- TOC, Total Organic Carbon [water, surface water]: 1.0486e-5 kg; lognormal variance with pedigree 0.352, pedigree (1,1,5,5,1)
  (same comment as for BOD5, Biological Oxygen Demand)
- Zinc II [water, ground-, long-term]: 5.0561e-7 kg; lognormal variance with pedigree 5.962, pedigree (1,1,5,5,1)
  (same comment as for BOD5, Biological Oxygen Demand)
- Zinc II [water, surface water]: 5.6155e-7 kg; lognormal variance with pedigree 1.122, pedigree (1,1,5,5,1)
  (same comment as for BOD5, Biological Oxygen Demand)

## Sampling procedure
The 2 Swiss HWI plants, used as the inventory reference technology mix, have a total annual capacity of 53'000 tons of hazardous waste. This corresponds to 39% of the Swiss total installed capacity in 2000. Swiss average plants size is 20'000 t/a.

## Extrapolations
Available waste composition data. Transfer coefficients from one modern HWI completed with data from MSWI. Waste-specific auxiliary material consumption adapted from MSWI. This dataset has been copied from an original dataset covering the geography CH. The uncertainty has been adjusted accordingly.
