# treatment of sewage sludge, 97% water, WWT, WW from GGBFS production, landfarming

Dataset: EcoSpold 2, unit process
Geography: US
Time period: 2000-01-01 to 2022-12-31
Technology level: current
Classification: ISIC rev.4 ecoinvent: 3821:Treatment and disposal of non-hazardous waste
Scenario: Business-as-Usual
System model: Substitution, consequential, long-term
Generated by: Nikolia Stoikou
Database: ecoinvent
isCopyrightProtected: true

## General comment
The process represents the treatment of a waste (sewage sludge) that is exclusively produced from another waste treatment. Recommended use of this dataset: to be used within the specific chain of treatments for 'wastewater from GGBFS production'. Share of biogenic carbon in the sludge: 0%. "GGBFS" stands for "Ground granulated blast furnace slag".

## Included activities start
The activity starts with the waste being available for landfarming. Collection and transportation of the waste to this process is not included.

## Included activities end
The activity ends with the waste being treated and waste-specific emissions from the landfarming process are released to the environment (air, water and soil). The activity is considering local fate of emissions and the initial specific wastewater composition (generating the sewage sludge). Further, it includes provision of fertiliser functions for N, P, K, if present in the sludge.

## Geography
The site has mean annual temperature (MAT) of 11.074 degC, mean annual precipitation (MAP) of 941.82 mm/year, mean annual actual evaporation (EAT) of 332.479019640491 mm/year. Climate will influence the local fate emissions based on the elemental composition of the sludge as well as water evaporation to air (= consumptive water use).
NOAA, 2022. U.S. Climate Normals, National Centres for Environmental Information (NCEI) Available at: https://www.currentresults.com/Weather/US/average-annual-precipitation-by-city.php

## Technology
Landfarming is the process of spreading a substrate on agricultural soil. Sewage sludge is generated in the wastewater treatment of wastewater from GGBFS production. Spreading of liquid sewage sludge (97w% water content) on agricultural fields with mobile vacuum tanker.

## Reference product
- sewage sludge, 97% water, WWT, WW from GGBFS production: -1 kg; By-product classification Waste; CPC 39920: Sewage sludge
  production volume 249637 kg
    In the United States, 26.50% of the sewage sludge is disposed through municipal incineration, 17% in sanitary landfill, and 56.50% in landfarming. Therefore, the PV for this reference product is calculated based on the production of sewage sludge of the wastewater treatment process (Venkatesan, A.K., Done, H.Y. and Halden, R.U., 2015. United States National Sewage Sludge Repository at Arizona State University—a new resource and research tool for environmental scientists, engineers, and epidemiologists. Environmental Science and Pollution Research, 22(3), pp.1577-1586. Available at: https://www.ncbi.nlm.nih.gov/pmc/articles/PMC4232481/ ; EDI, 2017. Beneficial Reuse of Biosolids Jurisdictional Review, EDI Environmental Dynamics Inc. Available at: https://www.crd.bc.ca/docs/default-source/irm-reports/consolidationreportnov17/appendixq.pdf?sfvrsn=d99609ca_2).
  properties: cadmium content 3.07487e-5, carbon allocation 0.0142538 kg, carbon content 0.475126, carbon content, fossil 0.475126, carbon content, non-fossil 0, chromium content 0.000375284, copper content 0.000611842, dry mass 0.03 kg, heating value, gross 0.107415 MJ, heating value, net 0 MJ, hydrogen content 0.0647934, iron content 0.0695897, lead content 0.000397091, nickel content 0.000314414, nitrogen content 0.033382, oxygen content 0.352323, price 0 EUR2005, water content 32.3333, water in wet mass 0.97 kg, wet mass 1 kg, zinc content 0.00305564

## Inputs from technosphere
- liquid manure spreading, by vacuum tanker: 0.00097087 m3
  service consumed for treatment sewage sludge spreading on agricultural fields.
- organic nitrogen fertiliser, as N: -0.0010015 kg
  gross fertilizer function provided from sewage sludge spreading on agricultural fields.
  production volume
    Calculated in proportion to wastewater reference product.
  properties: dry mass 1 kg, nitrogen content 1, price 0.473 EUR2005, wet mass 1 kg
  note on nitrogen content: Nitrogen content (on a dry matter basis) of organic nitrogen fertiliser, as N is calculated from the molecular formula of the substance (Nitrogen).

## Emissions to nature
- Ammonia [air, non-urban air or from high stacks]: 4.1013e-5 kg
  local fate emission from sewage sludge spreading on agricultural fields.
- Carbon dioxide, fossil [air, non-urban air or from high stacks]: 0.0522639 kg; lognormal variance with pedigree 0.0008, pedigree (1,1,2,1,1)
  CO2 emission calculated based on the carbon content of the sewage sludge. It is assumed that all carbon present in the sludge, after being emmited to soil, is transformed into CO2.
  Uncertainty: Uncertainty calculated from wastewater technosphere fate uncertainty, wastewater composition uncertainty, and treatment model uncertainty
- Dinitrogen monoxide [air, non-urban air or from high stacks]: 1.8016e-5 kg
  local fate emission from sewage sludge spreading on agricultural fields.
- Nitrogen oxides [air, non-urban air or from high stacks]: 7.9105e-6 kg; lognormal variance with pedigree 0.011177, pedigree (1,1,2,1,1)
  local fate emission from sewage sludge spreading on agricultural fields.
  Uncertainty: Uncertainty calculated from upstream wastewater technosphere fate uncertainty, wastewater composition uncertainty, and treatment model uncertainty
- Water [air, non-urban air or from high stacks]: 0.00034243 m3; lognormal variance with pedigree 0.0014527, pedigree (1,1,2,1,1)
  climate-dependent evaporation of water from sludge from sewage sludge spreading on agricultural fields.
  Uncertainty: Uncertainty calculated from upstream wastewater technosphere fate uncertainty, wastewater composition uncertainty, and treatment model uncertainty
- Non-hazardous waste disposed [inventory indicator, waste]: 1 kg
  Inventory indicator for waste mass disposed. To be used in EN15804 "other data" results.
- Cadmium II [soil, agricultural]: 9.2246e-7 kg; lognormal variance with pedigree 0.52532, pedigree (1,1,2,1,1)
  direct emission from sewage sludge spreading on agricultural fields.
  Uncertainty: Uncertainty calculated from upstream wastewater technosphere fate uncertainty, wastewater composition uncertainty, and treatment model uncertainty
- Carbon [soil, agricultural]: 0.014254 kg; lognormal variance with pedigree 0.052612, pedigree (1,1,2,1,1)
  (same comment as for Cadmium II)
- Chromium III [soil, agricultural]: 1.1259e-5 kg; lognormal variance with pedigree 0.2962, pedigree (1,1,2,1,1)
  (same comment as for Cadmium II)
- Copper ion [soil, agricultural]: 1.8355e-5 kg; lognormal variance with pedigree 0.25577, pedigree (1,1,2,1,1)
  (same comment as for Cadmium II)
- Heat, waste [soil, agricultural]: 0.62876 MJ; lognormal variance with pedigree 0.034135, pedigree (1,1,2,1,1)
  (same comment as for Cadmium II)
- Iron ion [soil, agricultural]: 0.0020877 kg; lognormal variance with pedigree 0.068745, pedigree (1,1,2,1,1)
  (same comment as for Cadmium II)
- Lead II [soil, agricultural]: 1.1913e-5 kg; lognormal variance with pedigree 0.29822, pedigree (1,1,2,1,1)
  (same comment as for Cadmium II)
- Nickel II [soil, agricultural]: 9.4324e-6 kg; lognormal variance with pedigree 0.25698, pedigree (1,1,2,1,1)
  (same comment as for Cadmium II)
- Zinc II [soil, agricultural]: 9.1669e-5 kg; lognormal variance with pedigree 0.16105, pedigree (1,1,2,1,1)
  (same comment as for Cadmium II)
- Nitrate [water, surface water]: 0.00065665 kg
  local fate emission from sewage sludge spreading on agricultural fields.
- Water [water, ground-]: 0.00062757 m3; lognormal variance with pedigree 0.0014527, pedigree (1,1,2,1,1)
  direct emission from not evaporated water (climate-dependent) from sludge from sewage sludge spreading on agricultural fields.
  Uncertainty: Uncertainty calculated from upstream wastewater technosphere fate uncertainty, wastewater composition uncertainty, and treatment model uncertainty
