# treatment of spent anion exchange resin from potable water production, municipal incineration

Dataset: EcoSpold 2, unit process
Geography: RoW
Time period: 2006-01-01 to 2022-12-31
Technology level: current
Classification: ISIC rev.4 ecoinvent: 3821:Treatment and disposal of non-hazardous waste
Synonyms: municipal waste incineration; Siedlungsabfallverbrennung; Kehrichtverbrennung
Scenario: Business-as-Usual
System model: Substitution, consequential, long-term
Share of production covered: 1.8 %
Generated by: Gabor Doka
Published in: Doka G. 2013
Database: ecoinvent
isCopyrightProtected: true

## General comment
This dataset represents the activity of waste disposal of spent anion exchange resin from potable water production in a municipal solid waste incinerator (MSWI) // Recommended use of this dataset: disposal of used ion exchange resins *for potable water production*. Resins used of other purifications can have significantly more toxic composition, depending on use. // // Waste composition (wet, in ppm): upper heating value 16.06 MJ/kg; lower heating value 6.081 MJ/kg; H2O 499710; O 70320; H 40160; C 327130; S 23980; N 28640; P 10; B n.a.; Cl 7880; Br n.a.; F n.a.; I n.a.; Ag n.a.; As n.a.; Ba n.a.; Cd 1.592; Co n.a.; Cr n.a.; Cu 16.311; Hg n.a.; Mn n.a.; Mo n.a.; Ni n.a.; Pb 9.2482; Sb n.a.; Se n.a.; Sn 226.21; V n.a.; Zn 34.545; Be n.a.; Sc n.a.; Sr n.a.; Ti n.a.; Tl n.a.; W n.a.; Si 1880; Fe n.a.; Ca n.a.; Al n.a.; K n.a.; Mg n.a.; Na n.a.; // Share of carbon in waste that is biogenic 0%. // Share of metals in waste not oxidised and bulk-recyclable (exclude very small or thin parts) Iron: 0%; Alu: 0%; Copper: 0%. // One kg of this waste produces 0.05049 kg of slag and 0.02777 kg of residues, which are landfilled. Additional solidification with 0.01111 kg of cement. // Net energy production: 0.5MJ/kg electric energy and 1.18MJ/kg thermal energy. // Recovery of metal scrap to recycling: 0g iron scrap, 0g aluminium scrap, 0g copper scrap.

## Included activities start
waste incineration from waste reception gate and delivery into waste bunker at incinerator plant site (without transports to the incinerator)

## Included activities end
Waste-specific short-term emissions to water from leachate. Long-term emissions from landfill to ground water.

## Geography
Specific to the technology mix encountered in Switzerland in 2010. Well applicable to modern incineration practices in Europe, North America or Japan.

## Technology
average Swiss MSWI plants in 2010 (grate incinerators) with electrostatic precipitator for fly ash (ESP), wet flue gas scrubber and 25% SNCR , 42.77% SCR-high dust , 32.68% SCR-low dust -DeNOx facilities and 0% without Denox (weighted according to mass of burnt waste, representing Swiss average). Efficiency of iron scrap separation from slag : 58%. Efficiency of non-ferrous scrap separation from slag : 31%. Gross electric efficiency technology mix 15.84% and Gross thermal efficiency technology mix 28.51%

## Time period
Waste composition as given in literature reference, theoretical data or other source. Transfer coefficients for modern MSWI.

## Reference product
- spent anion exchange resin from potable water production: -1 kg; By-product classification Waste; CPC 39: Wastes or scraps
  Main reference product of this activity (supply of disposal service).
  production volume 1.4193e6 kg
    based on anion exchanger resin demand from water deionisation process inventory (Althaus et al. 2007, p.834) and a total global deionised water demand of 7.48E12 kg (ecoinvent DB total process demand, Feb 2013) and a generic rate of 21.7w% of MSW into incineration (UNSD 2012)
  property heating value, net 6.08 MJ
    Value taken from the general comment of the treatment dataset.
  property price 0 EUR2005
    Waste products are assigned a price of zero as they are assumed to require further treatment.
  properties: carbon allocation 0.327 kg, carbon content 0.654, carbon content, fossil 0.654, carbon content, non-fossil 0, dry mass 0.5 kg, water content 1, water in wet mass 0.5 kg, wet mass 1 kg

## Inputs from technosphere
- ammonia, anhydrous, liquid: 9.8781e-5, 2.00979e-5, 0.000191754, 0.000738634, 8.9845e-5, 5.94963e-5, 0.00212547, 0.00019572 kg (8 suppliers, which the file names only by identifier); sum of these 0.0035198 kg; lognormal variance with pedigree 0.86235, pedigree (1,1,4,1,1)
  Input to DeNOx stage (100% NH3).
  Uncertainty: uncertainty calculated from uncertainty in average DeNOx input, uncertainty in the share of thermal NOx, uncertainty of nitrogen content in average municipal waste and the uncertainty in nitrogen content in *this* waste.
  properties: dry mass 1 kg, wet mass 1 kg
- cement, unspecified: 0.00014601, 0.000239596, 0.000909927, 1.13149e-5, 2.24883e-5, 3.43807e-5, 0.00916345, 2.85616e-5, 0.000551276 kg (9 suppliers, which the file names only by identifier); sum of these 0.011107 kg; lognormal variance with pedigree 0.076448, pedigree (1,1,4,1,1)
  Cement required for solidification of landfilled residual material.
  Uncertainty: Uncertainty calculated from uncertainty of the waste composition of this waste, of transfer coefficients in the incinerator and of the solidification recipe.
  properties: dry mass 1 kg, wet mass 1 kg
- chemical, inorganic: 0.00039538 kg; lognormal variance with pedigree 0.18782, pedigree (1,1,4,1,1)
  Auxilliary inputs for the wastewater treatment stage of the incinerator plant. Proxy for Polyelectrolyte.
  Uncertainty: uncertainty calculated from uncertainty in average Polyelectrolyte input, of transfer coefficients in the incinerator, and the uncertainty of the waste composition of this waste
  properties: carbon content, fossil 0.003, dry mass 1 kg, wet mass 1 kg
- chemical, organic: 4.1903e-7 kg; lognormal variance with pedigree 1.5146, pedigree (1,1,4,1,1)
  Auxilliary inputs for the wastewater treatment stage of the incinerator plant. Proxy for (pure) Trisodium-trimercapto-s-triazine (CAS 17766-26-6), used as 15% diluted solution, aka TMT15.
  Uncertainty: uncertainty calculated from uncertainty in average TMT15 input, of transfer coefficients in the incinerator, and the uncertainty of the waste composition of this waste
  properties: carbon content, fossil 0.628, dry mass 1 kg, heating value, net 19.03 MJ, wet mass 1 kg
- chromium oxide, flakes: 4.5005e-6 kg; lognormal variance with pedigree 1.2682, pedigree (1,1,4,1,1)
  Input to DeNOx stage.
  Uncertainty: uncertainty calculated from uncertainty in average DeNOx input, uncertainty in the share of thermal NOx, uncertainty of nitrogen content in average municipal waste and the uncertainty in nitrogen content in *this* waste.
  properties: dry mass 1 kg, wet mass 1 kg
- electricity, for reuse in municipal waste incineration only: -0.0055452, -0.0055452, -0.0055452, -0.0055452, -0.0055452, -0.0055452, -0.0055452, -0.0055452, -0.0055452, -0.0055452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 kWh (25 suppliers, which the file names only by identifier); sum of these -0.13863 kWh; lognormal variance with pedigree 0.47559, pedigree (1,1,1,1,1)
  Net electricity generated from this waste and used in internal MSWI plant energy redistribution.
  Uncertainty: uncertainty is calculated from uncertainties in waste composition and uncertainties in energy efficiency and the uncertainty in internal energy demand
  production volume
    calculated in proportion to reference product waste input to incinerator
  properties: exergy 3.6 MJ, price 0.1 EUR2005
  note on exergy: This exergy property is based on the exergy content of the product.
- heat, district or industrial, natural gas: 0.0631789, 0.17865, 0.416371 MJ (3 suppliers, which the file names only by identifier); sum of these 0.6582 MJ; lognormal variance with pedigree 0.86235, pedigree (1,1,4,1,1)
  Input to DeNOx stage, to heat up flue gas in low-dust SCR.
  Uncertainty: uncertainty calculated from uncertainty in average DeNOx input, uncertainty in the share of thermal NOx, uncertainty of nitrogen content in average municipal waste and the uncertainty in nitrogen content in *this* waste.
  properties: heating value, net 1 MJ
- heat, for reuse in municipal waste incineration only: -0.047264, -0.047264, -0.047264, -0.047264, -0.047264, -0.047264, -0.047264, -0.047264, -0.047264, -0.047264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 MJ (25 suppliers, which the file names only by identifier); sum of these -1.1816 MJ; lognormal variance with pedigree 0.25557, pedigree (1,1,1,1,1)
  (same comment as for electricity, for reuse in municipal waste incineration only)
  production volume
    calculated in proportion to reference product waste input to incinerator
  properties: exergy 0.1842 MJ, price 0.0106 EUR2005
- hydrochloric acid, without water, in 30% solution state: 0.00010392 kg; lognormal variance with pedigree 0.18782, pedigree (1,1,4,1,1)
  Auxilliary inputs for the wastewater treatment stage of the incinerator plant.
  Uncertainty: uncertainty calculated from uncertainty in average HCl input, of transfer coefficients in the incinerator, and the uncertainty of the waste composition of this waste
  properties: dry mass 1 kg, heating value, net 3.32 MJ, wet mass 1 kg
- iron (III) chloride, without water, in 40% solution state: 7.4111e-7 kg; lognormal variance with pedigree 0.74136, pedigree (1,1,4,1,1)
  Auxilliary inputs for the wastewater treatment stage of the incinerator plant.
  Uncertainty: uncertainty calculated from uncertainty in average FeCl3 input, of transfer coefficients in the incinerator, and the uncertainty of the waste composition of this waste
  properties: dry mass 1 kg, wet mass 1 kg
- municipal waste incineration facility: 2.5e-10 unit
  Demands per kilogram waste.
- process-specific burdens, residual material landfill: 0.00785457, 0.0199124 kg (2 suppliers, which the file names only by identifier); sum of these 0.027767 kg; lognormal variance with pedigree 0.067364, pedigree (1,1,4,1,1)
  Mass-specific expenditures required for landfilling of incineration residues.
  Uncertainty: uncertainty is calculated from uncertainties in waste composition and transfer coefficients in incinerator
- process-specific burdens, slag landfill: 0.0140973, 0.0357387 kg (2 suppliers, which the file names only by identifier); sum of these 0.049836 kg; lognormal variance with pedigree 0.076069, pedigree (1,1,4,1,1)
  Mass-specific expenditures required for landfilling of bottom ash.
  Uncertainty: uncertainty is calculated from uncertainties in waste composition and transfer coefficients in incinerator
- quicklime, milled, packed: 0.0042496 kg; lognormal variance with pedigree 0.39655, pedigree (1,1,4,1,1)
  Auxilliary inputs for the flue gas treatment stage of the incinerator plant.
  Uncertainty: uncertainty calculated from uncertainty in average CaO input, of transfer coefficients in the incinerator, and the uncertainty of the waste composition of this waste
  properties: dry mass 0.99 kg, water content 0.010101, wet mass 1 kg
- residual material landfill: 5.7848e-11 unit; lognormal variance with pedigree 0.067364, pedigree (1,1,4,1,1)
  Landfill infrastructure required for landfilling of incineration residues.
  Uncertainty: uncertainty is calculated from uncertainties in waste composition and transfer coefficients in incinerator
- slag landfill: 8.8597e-11 unit; lognormal variance with pedigree 0.076069, pedigree (1,1,4,1,1)
  Landfill infrastructure required for landfilling of bottom ash.
  Uncertainty: uncertainty is calculated from uncertainties in waste composition and transfer coefficients in incinerator
- sodium hydroxide, without water, in 50% solution state: 0.0091003 kg; lognormal variance with pedigree 0.13373, pedigree (1,1,4,1,1)
  Auxilliary inputs for the flue gas treatment stage of the incinerator plant.
  Uncertainty: uncertainty calculated from uncertainty in average NaOH input, of transfer coefficients in the incinerator, and the uncertainty of the waste composition of this waste
  properties: dry mass 1 kg, heating value, net 3.03 MJ, wet mass 1 kg
- titanium dioxide: 0.00022052 kg; lognormal variance with pedigree 1.2682, pedigree (1,1,4,1,1)
  Input to DeNOx stage (TiO2 catalyst carrier)
  Uncertainty: uncertainty calculated from uncertainty in average DeNOx input, uncertainty in the share of thermal NOx, uncertainty of nitrogen content in average municipal waste and the uncertainty in nitrogen content in *this* waste.
  properties: dry mass 1 kg, wet mass 1 kg
- transport, freight, lorry, unspecified: 5.56168e-5, 0.000355236, 0.00269325 metric ton*km (3 suppliers, which the file names only by identifier); sum of these 0.0031041 metric ton*km; lognormal variance with pedigree 0.044261, pedigree (1,1,4,1,1)
  Transport services to transport incineration residues to landfills.
  Uncertainty: uncertainty calculated from uncertainty of the waste composition of this waste, uncertainty of transfer coefficients and the uncertainty in generic transportation distances
- waste cement, hydrated: -0.00785457, -0.0199124 kg (2 suppliers, which the file names only by identifier); sum of these -0.027767 kg; lognormal variance with pedigree 0.068448, pedigree (1,1,1,1,1)
  Hydrated cement output for solidification of landfilled residual material.
  Uncertainty: Uncertainty calculated from uncertainty of the waste composition of this waste and transfer coefficients in the incinerator and of the solidification recipe.
  production volume
    calculated in proportion to reference product waste input to incinerator
  properties: dry mass 1 kg, wet mass 1 kg
- water, decarbonised: 0.443546, 0.0564815, 0.700564, 0.00396367, 0.071798, 0.108312, 0.0422648, 0.0218351, 0.825295, 0.131569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 kg (12 suppliers, which the file names only by identifier); sum of these 2.521 kg; lognormal variance with pedigree 0.74136, pedigree (1,1,4,1,1)
  Incinerator process water used in flue gas scrubber stage.
  Uncertainty: uncertainty calculated from uncertainty in average water input, and the uncertainty of the waste composition of this waste
  properties: wet mass 1 kg

## Inputs from nature
- Oxygen [natural resource, in air]: 1.2942 kg; lognormal variance with pedigree 0.039153, pedigree (1,1,4,1,1)
  Oxygen from ambient air needed to combust and oxidise this waste. Net demand, i.e. without O2 leaving the plant in flue gas uncombusted.
  Uncertainty: uncertainty is calculated from uncertainties in waste composition and transfer coefficients to flue gas and soild residues in incinerator

## Emissions to nature
- Ammonia [air, urban air close to ground]: 4.1384e-6 kg; lognormal variance with pedigree 0.92621, pedigree (1,1,4,1,1)
  Nitrogen species emitted to air after DeNOx stage.
  Uncertainty: uncertainty calculated from uncertainty in average N-emissions and uncertainty in the share of thermal NOx and the uncertainty in nitrogen content in *this* waste.
- Benzene [air, urban air close to ground]: 3.1794e-8 kg; lognormal variance with pedigree 0.096757, pedigree (1,1,4,1,1)
  Incomplete combustion product emitted to air.
  Uncertainty: uncertainty calculated from uncertainty in average operation emissions, and the uncertainty of the flue gas volume from this waste.
- Benzene, hexachloro- [air, urban air close to ground]: 6.6479e-11 kg; lognormal variance with pedigree 0.096757, pedigree (1,1,4,1,1)
  (same comment as for Benzene)
- Benzene, pentachloro- [air, urban air close to ground]: 1.6798e-10 kg; lognormal variance with pedigree 0.096757, pedigree (1,1,4,1,1)
  (same comment as for Benzene)
- Benzo(a)pyrene [air, urban air close to ground]: 7.0751e-13 kg; lognormal variance with pedigree 0.42337, pedigree (1,1,4,1,1)
  (same comment as for Benzene)
- Cadmium II [air, urban air close to ground]: 8.1144e-10 kg; lognormal variance with pedigree 1.5416, pedigree (1,1,4,1,1)
  Emission to air from waste composition and transfer coefficients.
  Uncertainty: uncertainty is calculated from uncertainties in waste composition and transfer coefficients in incinerator
- Carbon dioxide, fossil [air, urban air close to ground]: 1.1922 kg; lognormal variance with pedigree 0.041912, pedigree (1,1,4,1,1)
  (same comment as for Cadmium II)
- Carbon monoxide, fossil [air, urban air close to ground]: 5.4045e-5 kg; lognormal variance with pedigree 0.81783, pedigree (1,1,4,1,1)
  (same comment as for Benzene)
- Copper ion [air, urban air close to ground]: 1.4939e-9 kg; lognormal variance with pedigree 1.2442, pedigree (1,1,4,1,1)
  (same comment as for Cadmium II)
- Cyanide [air, urban air close to ground]: 9.1771e-5 kg; lognormal variance with pedigree 1.0285, pedigree (1,1,4,1,1)
  (same comment as for Ammonia)
- Dinitrogen monoxide [air, urban air close to ground]: 0.00042716 kg; lognormal variance with pedigree 1.0285, pedigree (1,1,4,1,1)
  (same comment as for Ammonia)
- Dioxins, measured as 2,3,7,8-tetrachlorodibenzo-p-dioxin [air, urban air close to ground]: 6.3583e-14 kg; lognormal variance with pedigree 0.42337, pedigree (1,1,4,1,1)
  (same comment as for Benzene)
- Heat, waste [air, urban air close to ground]: 12.228 MJ; lognormal variance with pedigree 0.046242, pedigree (1,1,4,1,1)
  Waste heat generated from heating value of this waste plus any electricity required to process it.
  Uncertainty: uncertainty is calculated from uncertainties in waste composition and uncertainties in energy efficiency and the uncertainty in internal energy demand
- Hydrochloric acid [air, urban air close to ground]: 4.4968e-6 kg; lognormal variance with pedigree 0.42742, pedigree (1,1,4,1,1)
  (same comment as for Cadmium II)
- Lead II [air, urban air close to ground]: 7.6191e-10 kg; lognormal variance with pedigree 1.3245, pedigree (1,1,4,1,1)
  (same comment as for Cadmium II)
- Methane, fossil [air, urban air close to ground]: 4.769e-7 kg; lognormal variance with pedigree 0.096757, pedigree (1,1,4,1,1)
  (same comment as for Benzene)
- NMVOC, non-methane volatile organic compounds [air, urban air close to ground]: 1.4469e-6 kg; lognormal variance with pedigree 0.096757, pedigree (1,1,4,1,1)
  (same comment as for Benzene)
- Nitrogen oxides [air, urban air close to ground]: 0.0013105 kg; lognormal variance with pedigree 0.92621, pedigree (1,1,4,1,1)
  Sum of fuel-Nox and thermal-NOx emitted to air after DeNOx stage.
  Uncertainty: uncertainty calculated from uncertainty in average N-emissions and uncertainty in the share of thermal NOx and the uncertainty in nitrogen content in *this* waste.
- Particulate Matter, < 2.5 um [air, urban air close to ground]: 3.7959e-6 kg; lognormal variance with pedigree 0.42337, pedigree (1,1,4,1,1)
  (same comment as for Benzene)
- Particulate Matter, > 2.5 um and < 10um [air, urban air close to ground]: 1.9075e-8 kg; lognormal variance with pedigree 0.20315, pedigree (1,1,4,1,1)
  (same comment as for Benzene)
- Phenol, pentachloro- [air, urban air close to ground]: 1.3846e-11 kg; lognormal variance with pedigree 0.096757, pedigree (1,1,4,1,1)
  (same comment as for Benzene)
- Phosphorus [air, urban air close to ground]: 1.0162e-8 kg; lognormal variance with pedigree 1.2954, pedigree (1,1,4,1,1)
  (same comment as for Cadmium II)
- Silicon [air, urban air close to ground]: 2.9281e-9 kg; lognormal variance with pedigree 0.65121, pedigree (1,1,4,1,1)
  (same comment as for Cadmium II)
- Sulfur dioxide [air, urban air close to ground]: 0.00025502 kg; lognormal variance with pedigree 0.28599, pedigree (1,1,4,1,1)
  (same comment as for Cadmium II)
- Tin ion [air, urban air close to ground]: 1.4776e-10 kg; lognormal variance with pedigree 0.9357, pedigree (1,1,4,1,1)
  (same comment as for Cadmium II)
- Toluene [air, urban air close to ground]: 6.3587e-8 kg; lognormal variance with pedigree 0.096757, pedigree (1,1,4,1,1)
  (same comment as for Benzene)
- Water [air, urban air close to ground]: 0.0017288 m3; lognormal variance with pedigree 2.6954, pedigree (1,1,4,1,1)
  Water vapour from waste humidity, hydrogen oxidation and part of the process water.
  Uncertainty: Uncertainty calculated from uncertainty in waste composition, process water input and the uncertainty of fraction to air.
- Zinc II [air, urban air close to ground]: 2.3154e-8 kg; lognormal variance with pedigree 1.1343, pedigree (1,1,4,1,1)
  (same comment as for Cadmium II)
- BOD5, Biological Oxygen Demand [water, ground-, long-term]: 0.00080356 kg; lognormal variance with pedigree 0.038031, pedigree (1,1,4,1,1)
  Long-term emissions from landfilling of incineration residues.
  Uncertainty: uncertainty is calculated from uncertainties in waste composition and transfer coefficients in incinerator and landfills.
- BOD5, Biological Oxygen Demand [water, surface water]: 0.00037776 kg; lognormal variance with pedigree 0.064919, pedigree (1,1,4,1,1)
  Emissions to water from waste composition and transfer coefficients in incinerator and landfills.
  Uncertainty: uncertainty is calculated from uncertainties in waste composition and transfer coefficients in incinerator and landfills
- COD, Chemical Oxygen Demand [water, ground-, long-term]: 0.0024566 kg; lognormal variance with pedigree 0.038031, pedigree (1,1,4,1,1)
  (same comment as for BOD5, Biological Oxygen Demand)
- COD, Chemical Oxygen Demand [water, surface water]: 0.00038267 kg; lognormal variance with pedigree 0.063364, pedigree (1,1,4,1,1)
  (same comment as for BOD5, Biological Oxygen Demand)
- Cadmium II [water, ground-, long-term]: 1.1617e-7 kg; lognormal variance with pedigree 6.9707, pedigree (1,1,4,1,1)
  (same comment as for BOD5, Biological Oxygen Demand)
- Cadmium II [water, surface water]: 1.5258e-10 kg; lognormal variance with pedigree 1.2576, pedigree (1,1,4,1,1)
  (same comment as for BOD5, Biological Oxygen Demand)
- Chloride [water, ground-, long-term]: 0.001826 kg; lognormal variance with pedigree 0.40324, pedigree (1,1,4,1,1)
  (same comment as for BOD5, Biological Oxygen Demand)
- Chloride [water, surface water]: 0.0060496 kg; lognormal variance with pedigree 0.32449, pedigree (1,1,4,1,1)
  (same comment as for BOD5, Biological Oxygen Demand)
- Copper ion [water, ground-, long-term]: 1.4569e-5 kg; lognormal variance with pedigree 1.1907, pedigree (1,1,4,1,1)
  (same comment as for BOD5, Biological Oxygen Demand)
- Copper ion [water, surface water]: 2.1135e-9 kg; lognormal variance with pedigree 1.0766, pedigree (1,1,4,1,1)
  (same comment as for BOD5, Biological Oxygen Demand)
- DOC, Dissolved Organic Carbon [water, ground-, long-term]: 0.0009721 kg; lognormal variance with pedigree 0.038031, pedigree (1,1,4,1,1)
  (same comment as for BOD5, Biological Oxygen Demand)
- DOC, Dissolved Organic Carbon [water, surface water]: 0.00016711 kg; lognormal variance with pedigree 0.063565, pedigree (1,1,4,1,1)
  (same comment as for BOD5, Biological Oxygen Demand)
- Heat, waste [water, surface water]: 3.801 MJ; lognormal variance with pedigree 0.046242, pedigree (1,1,4,1,1)
  (same comment as for Heat, waste)
- Lead II [water, ground-, long-term]: 4.4714e-6 kg; lognormal variance with pedigree 4.423, pedigree (1,1,4,1,1)
  (same comment as for BOD5, Biological Oxygen Demand)
- Lead II [water, surface water]: 8.8465e-10 kg; lognormal variance with pedigree 1.085, pedigree (1,1,4,1,1)
  (same comment as for BOD5, Biological Oxygen Demand)
- Nitrate [water, ground-, long-term]: 0.0010301 kg; lognormal variance with pedigree 0.26312, pedigree (1,1,4,1,1)
  (same comment as for BOD5, Biological Oxygen Demand)
- Nitrate [water, surface water]: 0.00036509 kg; lognormal variance with pedigree 0.19146, pedigree (1,1,4,1,1)
  (same comment as for BOD5, Biological Oxygen Demand)
- Phosphate [water, ground-, long-term]: 1.3399e-6 kg; lognormal variance with pedigree 5.4162, pedigree (1,1,4,1,1)
  (same comment as for BOD5, Biological Oxygen Demand)
- Phosphate [water, surface water]: 5.6221e-9 kg; lognormal variance with pedigree 0.90812, pedigree (1,1,4,1,1)
  (same comment as for BOD5, Biological Oxygen Demand)
- Silicon [water, ground-, long-term]: 0.00018988 kg; lognormal variance with pedigree 5.2694, pedigree (1,1,4,1,1)
  (same comment as for BOD5, Biological Oxygen Demand)
- Silicon [water, surface water]: 4.6093e-7 kg; lognormal variance with pedigree 0.76191, pedigree (1,1,4,1,1)
  (same comment as for BOD5, Biological Oxygen Demand)
- Sulfate [water, ground-, long-term]: 0.059392 kg; lognormal variance with pedigree 0.1462, pedigree (1,1,4,1,1)
  (same comment as for BOD5, Biological Oxygen Demand)
- Sulfate [water, surface water]: 0.012165 kg; lognormal variance with pedigree 0.13125, pedigree (1,1,4,1,1)
  (same comment as for BOD5, Biological Oxygen Demand)
- TOC, Total Organic Carbon [water, ground-, long-term]: 0.0009721 kg; lognormal variance with pedigree 0.038031, pedigree (1,1,4,1,1)
  (same comment as for BOD5, Biological Oxygen Demand)
- TOC, Total Organic Carbon [water, surface water]: 0.00016711 kg; lognormal variance with pedigree 0.063565, pedigree (1,1,4,1,1)
  (same comment as for BOD5, Biological Oxygen Demand)
- Tin ion [water, ground-, long-term]: 8.6575e-5 kg; lognormal variance with pedigree 1.7446, pedigree (1,1,4,1,1)
  (same comment as for BOD5, Biological Oxygen Demand)
- Tin ion [water, surface water]: 5.9845e-9 kg; lognormal variance with pedigree 1.5337, pedigree (1,1,4,1,1)
  (same comment as for BOD5, Biological Oxygen Demand)
- Water [water, surface water]: 0.00047366 m3; lognormal variance with pedigree 3.0388, pedigree (1,1,4,1,1)
  Process water released to surface water.
  Uncertainty: uncertainty calculated from uncertainty in process water input and the uncertainty of fraction to surface water.
- Zinc II [water, ground-, long-term]: 1.0505e-5 kg; lognormal variance with pedigree 3.227, pedigree (1,1,4,1,1)
  (same comment as for BOD5, Biological Oxygen Demand)
- Zinc II [water, surface water]: 3.1168e-9 kg; lognormal variance with pedigree 0.90945, pedigree (1,1,4,1,1)
  (same comment as for BOD5, Biological Oxygen Demand)
