# cement production, CEM V/A

Dataset: EcoSpold 2, unit process
Geography: Europe without Switzerland
Time period: 2005-01-01 to 2022-12-31
Technology level: current
Classification: ISIC rev.4 ecoinvent: 2394:Manufacture of cement, lime and plaster
Synonyms: Composite cement; CEM V/A
Tags: combined production
Scenario: Business-as-Usual
System model: Substitution, consequential, long-term
Share of production covered: 100 %
Generated by: Michael Elias Boesch
Published in: Boesch, M.E. 2010
Database: ecoinvent
isCopyrightProtected: true

## General comment
The dataset describes the production of cement (CEM V/A) in Europe.
[Dataset to be replaced by 'cement production, blast furnace slag 18-30% and 18-30% other alternative constituents, Europe without Switzerland and Austria, 2005 - 2009']
[Dataset to be replaced by 'cement production, blast furnace slag 18-30% and 18-30% other alternative constituents, Europe without Switzerland and Austria, 2005 - 2009']

## Included activities start
From cradle, i.e. including all upstream activities. As source of gypsum, waste gypsum from flue gas treatment is assumed.

## Included activities end
This activity ends with the cement produced in the cement mill. The dataset does not include packaging and administration.

## Reference product
- silica fume, densified: -1 kg; name silica_fume; source Boesch, M.E. 2010; By-product classification Recyclable; CPC 374: Plaster, lime and cement
  Literature Value
  production volume 4.08958e7 kg
    Amount relative to produced amount of reference product
  property carbon content, fossil 0
    asumed same composition as sylicon dioxide (http://www.silicafume.org/pdf/silicafume-users-manual.pdf)
  property carbon content, non-fossil 0
    (same comment as for silica fume, densified)
  property price 0.165426 EUR2005
    Estimated value. Based on price reported on the website Alibaba (https://www.alibaba.com/showroom/silica-fume-price.html, accessed 7 July 2019). Using exchange rate of 1EURO = 1.209 USD.
  properties: carbon allocation 0 kg, carbon content 0, dry mass 1 kg, water content 0, water in wet mass 0 kg, wet mass 1 kg

## Sampling procedure
Data approximates average European production
