# biomethane, low pressure burned in micro gas turbine 100kWe

Dataset: EcoSpold 2, unit process
Geography: CH
Time period: 2000-01-01 to 2022-12-31
Technology level: current
Classification: EcoSpold01Categories: biomass/cogeneration
Classification: ISIC rev.4 ecoinvent: 35:Electricity, gas, steam and air conditioning supply
Tags: with true value; ConvertedDataset
Scenario: Business-as-Usual
System model: Substitution, consequential, long-term
Generated by: Alex Primas
Published in: Primas A. 2007
Database: ecoinvent
isCopyrightProtected: true

## General comment
The multioutput-process 'biogas, burned in micro gas turbine delivers the coproducts 'heat, biogas, allocation exergy, at micro gas turbine 100kWe' and 'electricity, biogas, allocation exergy, at micro gas turbine 100kWe'. The exergy allocation is the allocation scheme suggested to be used within the ecoinvent database (e.g. in electricity mixes).
[This dataset was already contained in the ecoinvent database version 2. It was not individually updated during the transfer to ecoinvent version 3. Life Cycle Impact Assessment results may still have changed, as they are affected by changes in the supply chain, i.e. in other datasets. This dataset was generated following the ecoinvent quality guidelines for version 2. It may have been subject to central changes described in the ecoinvent version 3 change report (http://www.ecoinvent.org/database/ecoinvent-version-3/reports-of-changes/), and the results of the central updates were reviewed extensively. The changes added e.g. consistent water flows and other information throughout the database. The documentation of this dataset can be found in the ecoinvent reports of version 2, which are still available via the ecoinvent website. The change report linked above covers all central changes that were made during the conversion process.]

## Included activities end
The module includes fuel input, infrastructure, emissions to air, and working materials for operation.

## Geography
Biogas input modelled for conditions in Switzerland. Process applicable in central European conditions.

## Technology
Radial turbine with recuperation for preheating the compressed air and fuel gas booster to increase gas pressure. Operation with refined biogas from low pressure gas network. Electrical efficiency 29%, total efficiency 75%. Operation as base load engine with low partial load hours.

## Reference product
- electricity, low voltage: 1 kWh; By-product classification allocatable product; CPC 17100: Electrical energy
  production volume 0.02 kWh
    This is a placeholder value that does not reflect real-world production volumes. This dataset does not currently require a real-world production volume to work in the database framework, and no actual data were collected yet. This has no negative effect on the results of the ecoinvent database.
    The placeholder value of this dataset was calculated by scaling the placeholder value of the GLO dataset, using the Swiss average GDP share relative to the global GDP (based on constant 2017 international USD from 2015-2019, World Bank (2022)).
    Reference:
    World bank (2022). GDP, PPP (constant 2017 international $). https://data.worldbank.org/indicator/NY.GDP.MKTP.PP.KD (last accessed on 2022-05-17).
  property price 0.107 EUR2005
    Temporary price data. Calculated as 90% of purchasers price based on: IEA Key world energy statistics 2004 (www.iea.org/textbase/nppdf/free/2004/keyworld2004.pdf)
  properties: carbon allocation 0 kg, carbon content 0, true value relation 3.6

## Inputs from technosphere
- biomethane, low pressure: 12 MJ
  properties: carbon content, non-fossil 0.695496, dry mass 0.0218341 kg, wet mass 0.0218341 kg
- heat, central or small-scale, other than natural gas: -5.40002 MJ
  production volume
    Unknown
    Calculated from the production volume of methane, 96% by volume, from biogas, low pressure, at user in proportion to the respective output amounts.
  properties: exergy 0.169678 MJ, heating value, net 1 MJ, price 0.0106 EUR2005
  note on exergy: allocation factor for electricity (=1) vs. heat, where heat is calculated as the termodynamic mean temperature Tm = (Tfeed-Treturn)/ln(Tfeed/Treturn), relative to the application temperature (Tu, typically = 293 K), i.e. (Tm-Tu)/Tm
- lubricating oil: 6.00002e-6 kg; lognormal variance with pedigree 0.0412, pedigree (2,3,5,1,1)
  Company data
  Company data
  properties: carbon content, fossil 0.75, dry mass 1 kg, heating value, net 40.2 MJ, wet mass 1 kg
  note on carbon content, fossil: Lubricating oil is produced from diesel. C-content/dry mass of fats and oils considered 75%, from: ecoinvent v2.2 report, n 15a, pg 40
  note on heating value, net: Literature value, Source: IPCC 2006, 2006 IPCC Guidelines for National Greenhouse Gas Inventories, Prepared by the National Greenhouse Gas Inventories Programme, Eggleston H.S., Buendia L., Miwa K., Ngara T. and Tanabe K. (eds). Published: IGES, Japan
- maintenance, micro gas turbine, 100kW electrical: 1.194e-6 unit; lognormal variance with pedigree 0.0412, pedigree (2,3,5,1,1)
  Uncertainty of maintenance cycle
  This exchange has an activity link directly to the producing activity because the product is primarily consumed in the same geographical area where it is produced.
- micro gas turbine, 100kW electrical: 2.38801e-7 unit; lognormal variance with pedigree 0.3512, pedigree (2,3,5,1,1)
  Uncertainty of life time
  This exchange has an activity link directly to the producing activity because the product is primarily consumed in the same geographical area where it is produced.
- storage, 10'000 l: 9.90004e-8 unit; lognormal variance with pedigree 0.3512, pedigree (2,3,5,1,1)
  Uncertainty of life time
  Uncertainty of life time;activityLink introduced to establish a direct link to the corresponding regional supply of this product
- waste mineral oil: -6.60003e-6 kg; lognormal variance with pedigree 0.0288, pedigree (4,3,2,1,1)
  Calculated from oil input
  Calculated from oil input
  production volume
    Calculated from the production volume of methane, 96% by volume, from biogas, low pressure, at user in proportion to the respective output amounts.
  properties: carbon content, fossil 0.864444, dry mass 0.9 kg, heating value, net 34.7 MJ, water content 0.111111, wet mass 1 kg
  note on carbon content, fossil: Tab A.6, ecoinvent v2.2 report 13_I. C content has been calculated after data in the tables, and then referred to 1 kg DM
  note on heating value, net: Value taken from the general comment of the treatment dataset.

## Emissions to nature
- Carbon dioxide, non-fossil [air, urban air close to ground]: 0.669339 kg; lognormal variance with pedigree 0.0512, pedigree (2,5,5,5,1)
  Calculated from composition of biogas
- Carbon monoxide, non-fossil [air, urban air close to ground]: 0.000336001 kg; lognormal variance with pedigree 0.7092, pedigree (2,3,5,1,3)
  Estimate based on different references
- Dinitrogen monoxide [air, urban air close to ground]: 1.2e-5 kg; lognormal variance with pedigree 0.186, pedigree (4,5,5,1,4)
  Value for large natural gas power plants used as approximation
- Methane, non-fossil [air, urban air close to ground]: 6.48003e-5 kg; lognormal variance with pedigree 0.1166, pedigree (4,3,5,1,3)
  Estimate based on few references
- NMVOC, non-methane volatile organic compounds [air, urban air close to ground]: 7.20003e-6 kg; lognormal variance with pedigree 0.1166, pedigree (4,3,5,1,3)
  Estimate based on few references
- Nitrogen oxides [air, urban air close to ground]: 0.000384002 kg; lognormal variance with pedigree 0.0992, pedigree (2,3,5,1,3)
  Estimate based on different references
- Particulate Matter, < 2.5 um [air, urban air close to ground]: 6.00002e-6 kg; lognormal variance with pedigree 0.440025, pedigree (4,4,5,2,4)
  Value for large natural gas power plants used as approximation
- Sulfur dioxide [air, urban air close to ground]: 6.60003e-6 kg; lognormal variance with pedigree 0.0592, pedigree (2,5,5,5,3)
  Approximation with data from natural gas network

## Sampling procedure
Literature data and manufacturer information

## Review by Rolf Frischknecht 2007-08-13
passed
none
