# butter production, from cow milk

Dataset: EcoSpold 2, unit process
Geography: GLO
Time period: 2007-01-01 to 2022-12-31
Technology level: current
Classification: ISIC rev.4 ecoinvent: 1050:Manufacture of dairy products
Scenario: Business-as-Usual
System model: Substitution, consequential, long-term
Share of production covered: 9.5 %
Generated by: Tereza Levova
Published in: Nilsson, K. 2010
Database: ecoinvent
isCopyrightProtected: true

## General comment
Butter is a dairy product made by churning fresh or fermented cream or milk. This activity covers main flows related to butter production from milk.
The process of buttermaking is basically a mechanical one in which milk and later on cream, an emulsion of oil in water, is transformed to butter, an emulsion of water in oil. This is achieved by a process of batch or continuous churning.

## Included activities start
This activity starts when the milk enters the dairy gate.

## Included activities end
This activity end when the finished product - butter - is ready to leave the gates of the dairy. Packaging is not included in this inventory.

## Technology
A number of continuous techniques are available such as methods in which milk and later on cream is subjected to high speed churning and continuous working. The main steps of buttermaking are always the same.
Scheme of butter manufacture from cream (EU Commission, IPPC, 2006, Reference Document on Best Available Techniques in the Food, Drink and Milk Industries). This sheme does not include the previous step; milk to cream production, while this dataset does.

## Parameters
- fraction, process water, to air: 0.15 dimensionless; name fraction_PW_to_air; lognormal variance with pedigree 0.092025, pedigree (4,4,3,2,4)
  Literature value. In case when no industry/process specific data are available, default evaporation fraction value is used. This value is 15% and is based on literature (Statistics Canada, 2007 & Shaffer, K.H., 2008, Consumptive water use in the Great Lakes Basin, USGS & Shiklomanov, 2003, World Water Resources at the Beginning of the 21st Century) and has been approved by an expert.
- fraction, tap water, to air: 0.15 dimensionless; name fraction_TW_to_air; = fraction_PW_to_air; lognormal variance with pedigree 0.092025, pedigree (4,4,3,2,4)
  Calculated value. See comment in the other parametres present in this dataset. Tap water is considered to be always used as process water, thus process water fractions to air are applied to all tap water input flows to calculate the amount of water consumed in the processes.

## Reference product
- butter, from cow milk: 1 kg; name RP_amount_1; By-product classification allocatable product; CPC 22241: Butter and other fats and oils derived from milk of cattle
  production volume 2.44753e9 kg
    Calculated based on literature value.
    4895069.52 ton is the amount of butter, from cow milk produced in the world in 2011 (FAOstat, accessed 20130122).
    It is estimated that half of the butter is produced from cream and half directly from milk.
  property ash content 0.000487448 kg; name ash_C_butter; = 1/DM_butter*0.0004
    Calculated based on literature value (USDA, National Nutrient Database for Standard Reference, "Butter, without salt", accessed 20130121).
  property carbohydrates content 0.000731172 kg; name carbohydrates_C_butter; = 1/DM_butter*0.0006
    (same comment as for butter, from cow milk)
  property carbon content, non-fossil 0.747144; = ((fat_C_butter*0.75)+( protein_C_butter*0.53)+( ash_C_butter*0)+( carbohydrates_C_butter*0.46)+( fibre_C_butter*0.46))
    Calculated value. Biogene carbon content on a dry matter basis.
  property dry mass 0.8206 kg; name DM_butter; = WM_butter-WWM_butter
  property fat (total lipid) content 0.988423 kg; name fat_C_butter; = 1/DM_butter*0.8111
    (same comment as for butter, from cow milk)
  property fibre (total dietary) content 0 kg; name fibre_C_butter; = 1/DM_butter*0
    (same comment as for butter, from cow milk)
  property price 2.49 EUR2005
    Calculated based on data from FAOSTAT (accessed 20140428). The price is calculated by using data on total world import quantity (tonnes) and import value (1000 USD), year 2005. 1354596 tonnes of Butter, cow milk was imported in the world in 2005. The import value was 4071586000 USD. The calculated price is thus (4071586/1354596=3*0.8=) 2.424 Euro. Using the same approach the calculated price for 2010 was 3.38 Euro.
  property protein content 0.0103583; name protein_C_butter; = 1/DM_butter*0.0085
    (same comment as for butter, from cow milk)
  property water content 0.218621; = WWM_butter/DM_butter
  property water in wet mass 0.1794 kg; name WWM_butter
  properties: carbon allocation 0.613106 kg, carbon content 0.747144, carbon content, fossil 0, wet mass 1 kg

## Inputs from technosphere
- buttermilk, from cow milk: -1.01 kg; name BP_amount_1; source Nilsson, K. 2010; lognormal variance with pedigree 0.0078, pedigree (3,4,3,4,2)
  Literature value.
  production volume
    Calculated from production volume of reference product using the relative outputs.
  property ash content 0.0562448 kg; name ash_C_buttermilk; = 1/DM_buttermilk*0.0068
  property carbohydrates content 0.403639 kg; name carbohydrates_C_buttermilk; = 1/DM_buttermilk*0.0488
  property dry mass 0.1209 kg; name DM_buttermilk; = WM_buttermilk-WWM_buttermilk
  property fat (total lipid) content 0.27378 kg; name fat_C_buttermilk; = 1/DM_buttermilk*0.0331
  property fibre (total dietary) content 0 kg; name fibre_C_buttermilk; = 1/DM_buttermilk*0
  property protein content 0.265509; name protein_C_buttermilk; = 1/DM_buttermilk*0.0321
  property water in wet mass 0.8791 kg; name WWM_buttermilk
  properties: carbon content, non-fossil 0.531729, price 1.1 EUR2005, water content 7.2713, wet mass 1 kg
  note on ash content: Calculated based on literature value (USDA, National Nutrient Database for Standard Reference, "Milk, buttermilk, fluid, whole", accessed 20130121).
- cow milk: 18.9 kg; name milk_input; lognormal variance with pedigree 0.0458, pedigree (3,4,5,4,2)
  Literature value.
  kg of Fat and Protein Corrected Milk. FPCM is 4.0% fat and 3.3% true protein content. Conversion to FPCM is as follow, according to the International Dairy Federation: FPCM (kg/yr) = Production (kg/yr) x [0.1226 x Fat% + 0.0776 x Protein% + 0.2534]
  properties: carbon content, non-fossil 0.53797, dry mass 0.1231 kg, water content 7.12348, wet mass 1 kg
- dairy: 0.000231955 m3; = 1/dairy_lifetime_capacity*18.9/dairy_lifetime; source Schmid, A. 2010; lognormal variance with pedigree 0.3452, pedigree (3,4,5,4,2)
  Calculated based on literature data (Schmid, A.; 2010, Bachelor-Thesis; Carbon Footprint von Schweizer Käse, supervised by T.Nemecek, Agroscope).
  20 years is the lifetime of a dairy
  (18*10*3=) 540m3 is the volume of the dairy
  18.9 l of milk is needed to produce 1kg of butter
  2.2E6 kg/year is the amount of milk proccessed annually in the dairy of volume of 540m3.
  property lifetime 20 year; name dairy_lifetime
  property lifetime capacity [kg] 4074.07 kg; name dairy_lifetime_capacity; = 2.2E6/(10*18*3)
  note on lifetime capacity [kg]: Calculated based on literature value. The lifetime capacity might vary a lot dipending on the size of the dairy. This dairy of volume of (18*10*3=) 540m3 has a capacity of 2.2E6 kg of process milk/year. This milk can be processed to many different products such as cheese, butter or yogurt.
- electricity, medium voltage: 1.05278 kWh; = UnitConversion(3.79, 'MJ', 'kWh'); source Nilsson, K. 2010; lognormal variance with pedigree 0.0458, pedigree (3,4,5,4,2)
  Literature value.
- heat, district or industrial, natural gas: 3.57068 MJ; source Nilsson, K. 2010; lognormal variance with pedigree 0.0458, pedigree (3,4,5,4,2)
  Literature value.
  properties: heating value, net 1 MJ
- heat, district or industrial, other than natural gas: 0.14932 MJ; source Nilsson, K. 2010; lognormal variance with pedigree 0.0458, pedigree (3,4,5,4,2)
  Literature value.
  properties: heating value, net 1 MJ
- nitric acid, without water, in 50% solution state: 0.000449488, 0.000253882, 0.00154595, 0.000375833, 0.000377229, 0.00330281, 0.0009381, 0.00121997, 0.00286417, 0.000407563 kg (10 suppliers, which the file names only by identifier); sum of these 0.011735 kg; source Djekic, I. 2014; lognormal variance with pedigree 0.0458, pedigree (3,4,5,4,2)
  Literature value (Djekic, I., et.al., 2014). The nitric acid is used as a cleaning agent and after use is released together with the wastewater.
  properties: dry mass 1 kg, wet mass 1 kg
- skimmed milk, from cow milk: -16.89 kg; name BP_amount_2; lognormal variance with pedigree 0.0078, pedigree (3,4,3,4,2)
  Literature value.
  production volume
    Calculated from production volume of reference product using the relative outputs.
  property ash content 0.0818777 kg; name ash_C_skimmed_milk; = 1/DM_skimmed_milk*0.0075
  property carbohydrates content 0.541485 kg; name carbohydrates_C_skimmed_milk; = 1/DM_skimmed_milk*0.0496
  property dry mass 0.0916 kg; name DM_skimmed_milk; = WM_skimmed_milk-WWM_skimmed_milk
  property fat (total lipid) content 0.00873362 kg; name fat_C_skimmed_milk; = 1/DM_skimmed_milk*0.0008
  property fibre (total dietary) content 0 kg; name fibre_C_skimmed_milk
  property protein content 0.367904; name protein_C_skimmed_milk; = 1/DM_skimmed_milk*0.0337
  property water in wet mass 0.9084 kg; name WWM_skimmed_milk
  properties: carbon content, non-fossil 0.450622, price 0.337 EUR2005, water content 9.91703, wet mass 1 kg
  note on ash content: Calculated based on literature data (USDA, National Nutrient Database for Standard Reference, accessed 20130123), "Milk, nonfat, fluid, without added vitamin A and vitamin D (fat free or skim)".
  note on carbon content, non-fossil: Calculated value based on literature values (Kay, A.D.; Vrede, T., 2010, Evolutionary and Biochemical Aspects, Global Ecology, Elsevier B.V., S.E. Jørgensen Ed.). Biogene carbon content on a dry matter basis.
- sodium hydroxide, without water, in 50% solution state: 0.006205 kg; source Djekic, I. 2014; lognormal variance with pedigree 0.0458, pedigree (3,4,5,4,2)
  Literature value (Djekic, I., et.al., 2014). The sodium hydroxide is used as a cleaning agent and after use is released together with the wastewater.
  properties: dry mass 1 kg, heating value, net 3.03 MJ, wet mass 1 kg
- tap water: 14.12 kg; name tap_water_input; source Nilsson, K. 2010; lognormal variance with pedigree 0.0458, pedigree (3,4,5,4,2)
  Literature value.
  properties: carbon content, fossil 0.00178991, dry mass 0.000337476 kg, water content 2962.17, wet mass 1 kg
  note on carbon content, fossil: Bicarbonate content is 2.93 mol/m3. CO2 content is 0.1 mol/m3 (ecoinvent v2.2 report 8, Tab 93.1).
- wastewater from potato starch production: -5.77609e-5, -0.0119442 m3 (2 suppliers, which the file names only by identifier); sum of these -0.012002 m3; = (tap_water_input/1000)-water_to_air_unspecified; source Djekic, I. 2014; lognormal variance with pedigree 0.1786, pedigree (4,5,5,5,5)
  Calculated value.
  Wastewater from potato starch production is a proxy for the wastewater from butter production for which data are not available.
  The amount of wastewater is calculated as difference between the amount of tap water entering the process and the amount of water which is consumed in th process (evaporates).
  Cross referenced; according to literature (Djekic, 2013, Environmental life-cycle assessment of various dairy products) the amount of wastewater produced when producing butter is between 6.41 - 9.61 l/kg.
  production volume
    Calculated from production volume of reference product using the relative outputs.
  properties: carbon content, non-fossil 0.993118, dry mass 0.871801 kg, water content 1146.05, wet mass 1000 kg

## Emissions to nature
- Water [air, unspecified]: 0.002118 m3; name water_to_air_unspecified; = ((tap_water_input/1000)*fraction_TW_to_air); lognormal variance with pedigree 0.0458, pedigree (3,4,5,4,2)
  Calculated value based on literature values and expert opinion. See comments in the parametres' comment field.
  property fraction, origin: fresh water 1; name fraction_origin_fresh_water
  property fraction, origin: salt water 0; name fraction_origin_salt_water
  property fraction, origin: unspecified 0; name fraction_origin_unspecified

## Sampling procedure
Literature

## Extrapolations
This dataset was created based on literature data (Nilsson K., 2010, Comparative life cycle assessment of margarine and butter consumed in the UK, Germany and France) which present data collected at dairies in Denmark and Germany,
