# treatment of waste plastic plaster, sanitary landfill

Dataset: EcoSpold 2, unit process
Geography: RoW
Time period: 1994-01-01 to 2022-12-31
Technology level: current
Classification: ISIC rev.4 ecoinvent: 3821:Treatment and disposal of non-hazardous waste
Classification: EcoSpold01Categories: waste management/sanitary landfill
Tags: ConvertedDataset; Treatment
Scenario: Business-as-Usual
System model: Substitution, consequential, long-term
Generated by: Gabor Doka (obsolete)
Published in: Doka G. 2007
Database: ecoinvent
isCopyrightProtected: true

## General comment
Inventoried waste contains 4.75% organics in plastic plaster; 95.3% Filler (lime); .
waste composition (wet, in ppm): upper heating value 1.217 MJ/kg; lower heating value 1.209 MJ/kg; H2O n.a.; O 465730; H 3465; C 139890; S n.a.; N n.a.; P n.a.; B n.a.; Cl 9448.8; Br n.a.; F n.a.; I n.a.; Ag n.a.; As 1.4756; Ba n.a.; Cd 12.709; Co 93.76; Cr 42.892; Cu n.a.; Hg 0.028575; Mn n.a.; Mo 20.245; Ni 3.1948; Pb 113.52; Sb n.a.; Se n.a.; Sn 134.25; V n.a.; Zn 80.091; Be n.a.; Sc n.a.; Sr n.a.; Ti n.a.; Tl n.a.; W n.a.; Si n.a.; Fe n.a.; Ca 381000; Al n.a.; K n.a.; Mg n.a.; Na n.a.;
Share of carbon in waste that is biogenic 0%.
Overall degradability of waste during 100 years: 0.04%.
[This dataset was already contained in the ecoinvent database version 2. It was not individually updated during the transfer to ecoinvent version 3. Life Cycle Impact Assessment results may still have changed, as they are affected by changes in the supply chain, i.e. in other datasets. This dataset was generated following the ecoinvent quality guidelines for version 2. It may have been subject to central changes described in the ecoinvent version 3 change report (http://www.ecoinvent.org/database/ecoinvent-version-3/reports-of-changes/), and the results of the central updates were reviewed extensively. The changes added e.g. consistent water flows and other information throughout the database. The documentation of this dataset can be found in the ecoinvent reports of version 2, which are still available via the ecoinvent website. The change report linked above covers all central changes that were made during the conversion process.]

## Included activities end
Waste-specific short-term emissions to air via landfill gas incineration and landfill leachate. Burdens from treatment of short-term leachate (0-100a) in wastewater treatment plant (including WWTP sludge disposal in municipal incinerator). Long-term emissions from landfill to groundwater (after base lining failure).

## Geography
Technology encountered in Switzerland in 2000. Landfill includes base seal, leachate collection system, treatment of leachate in municipal wastewater treatment plant.

## Technology
Swiss municipal sanitary landfill for biogenic or untreated municipal waste ('reactive organic landfill'). Landfill gas and leachate collection system. Recultivation and monitoring for 150 years after closure.

## Reference product
- waste plastic plaster, for final disposal: -1 kg; By-product classification Waste; CPC 39270: Waste, parings and scrap of plastics
  EcoSpold01Location=CH
  production volume 2120.56 kg
    Production volume amount was scaled from the respective Swiss value. GDP scaling was employed with Switzerland accounting for roughly 0.8% of the global GDP.
  property carbon content, fossil 0.54
    C content was calculated for 1 kg DM, using data in Tab A.4, ecoinvent v2.2 report 13_I.
  property heating value, net 16.36 MJ
    LHV is calculated based on the Carbon content of the product. More details can be found on the respective documentation.
  property price 0 EUR2005
    Waste products are assigned a price of zero as they are assumed to require further treatment.
  properties: carbon allocation 0.54 kg, carbon content 0.54, carbon content, non-fossil 0, dry mass 1 kg, water content 0, water in wet mass 0 kg, wet mass 1 kg

## Inputs from technosphere
- cement, unspecified: 4.31182e-10, 7.07549e-10, 2.6871e-9, 3.34138e-11, 6.64099e-11, 1.01529e-10, 2.70605e-8, 8.4345e-11, 1.62797e-9 kg (9 suppliers, which the file names only by identifier); sum of these 3.28e-8 kg; lognormal variance with pedigree 0.752, pedigree (1,1,5,5,1)
  EcoSpold01Location=CH
  burden from incineration of sludge from wastewater treatment of the short-term leachate (0-100a). uncertainty is calculated from uncertainties in waste composition and transfer coefficients in incinerator and uncertainty of waste decomposition and short-term leaching in sanitary landfill
  properties: dry mass 1 kg, wet mass 1 kg
- chemical, inorganic: 4.48e-11 kg; lognormal variance with pedigree 1.072, pedigree (1,1,5,5,1)
  EcoSpold01Location=GLO
  burden from incineration of sludge from wastewater treatment of the short-term leachate (0-100a). uncertainty is calculated from uncertainties in waste composition and transfer coefficients in incinerator and uncertainty of waste decomposition and short-term leaching in sanitary landfill
  properties: carbon content, fossil 0.003, dry mass 1 kg, wet mass 1 kg
  note on carbon content, fossil: This dataset is an unweighted average of 20 inorganic substances (listed in Tab 88.1, ecoinvent v2.2 report 8, part II), being part of the top100 chemicals included in this database. The C-content has also been calculated as an unweighted average of the C content of the substances composing this dataset.
- chemical, organic: 3.4e-8 kg; lognormal variance with pedigree 1.882, pedigree (1,1,5,5,1)
  burden from incineration of sludge from wastewater treatment of the short-term leachate (0-100a). uncertainty is calculated from uncertainties in waste composition and transfer coefficients in incinerator and uncertainty of waste decomposition and short-term leaching in sanitary landfill
  EcoSpold01Location=GLO
  properties: carbon content, fossil 0.628, dry mass 1 kg, heating value, net 19.03 MJ, wet mass 1 kg
  note on carbon content, fossil: This dataset is an unweighted average of 20 organic substances (listed in Tab 88.1, ecoinvent v2.2 report 8, part II), being part of the top100 chemicals included in this database. The C-content has also been calculated as an unweighted average of the C content of the substances composing this dataset.
- electricity, high voltage: 5.75755e-8, 2.12735e-9, 2.12698e-9, 4.72123e-7, 1.06429e-8, 3.97695e-8, 5.95764e-8, 2.70586e-8 kWh (8 suppliers, which the file names only by identifier); sum of these 6.71e-7 kWh; lognormal variance with pedigree 1.392, pedigree (1,1,5,5,1)
  (same comment as for cement, unspecified)
- electricity, low voltage: 8.43486e-7, 5.07636e-5, 5.66142e-6, 7.04973e-6, 6.08109e-6, 2.12035e-7, 2.85186e-6, 1.03673e-6 kWh (8 suppliers, which the file names only by identifier); sum of these 7.45e-5 kWh; lognormal variance with pedigree 0.2106, pedigree (5,5,5,5,5)
  burden from wastewater treatment of the short-term leachate (0-100a). Uncertainty calculated from unertainty of the waste composition of this waste, uncertainty in waste decomposition and short-term leaching in sanitary landfill
  EcoSpold01Location=CH
  Uncertainty: . Uncertainty calculated from unertainty of the waste composition of this waste, uncertainty in waste decomposition and short-term leaching in sanitary landfill
- heat, central or small-scale, other than natural gas: 3.25484e-5, 6.95847e-8 MJ (2 suppliers, which the file names only by identifier); sum of these 3.2618e-5 MJ; lognormal variance with pedigree 0.2106, pedigree (5,5,5,5,5)
  (same comment as for electricity, low voltage)
  properties: heating value, net 1 MJ
- heat, district or industrial, natural gas: 4.32174e-6, 1.22205e-5, 2.84817e-5 MJ (3 suppliers, which the file names only by identifier); sum of these 4.5024e-5 MJ; lognormal variance with pedigree 0.2106, pedigree (5,5,5,5,5)
  burden from wastewater treatment of the short-term leachate (0-100a). Uncertainty calculated from unertainty of the waste composition of this waste, uncertainty in waste decomposition and short-term leaching in sanitary landfill
  EcoSpold01Location=RER
  Uncertainty: . Uncertainty calculated from unertainty of the waste composition of this waste, uncertainty in waste decomposition and short-term leaching in sanitary landfill
  properties: heating value, net 1 MJ
- heat, district or industrial, other than natural gas: 3.24074e-6, 5.65891e-9, 6.63602e-7 MJ (3 suppliers, which the file names only by identifier); sum of these 3.91e-6 MJ; lognormal variance with pedigree 0.982, pedigree (1,1,5,5,1)
  (same comment as for cement, unspecified)
  properties: heating value, net 1 MJ
- hydrochloric acid, without water, in 30% solution state: 2.69e-11 kg; lognormal variance with pedigree 1.072, pedigree (1,1,5,5,1)
  burden from incineration of sludge from wastewater treatment of the short-term leachate (0-100a). uncertainty is calculated from uncertainties in waste composition and transfer coefficients in incinerator and uncertainty of waste decomposition and short-term leaching in sanitary landfill
  EcoSpold01Location=RER
  properties: dry mass 1 kg, heating value, net 3.32 MJ, wet mass 1 kg
- iron (III) chloride, without water, in 40% solution state: 8.16e-9 kg; lognormal variance with pedigree 1.072, pedigree (1,1,5,5,1)
  (same comment as for cement, unspecified)
  properties: dry mass 1 kg, wet mass 1 kg
- municipal waste incineration facility: 1.17e-15 unit; lognormal variance with pedigree 0.982, pedigree (1,1,5,5,1)
  EcoSpold01Location=CH
  Burden from incineration of sludge from wastewater treatment of the short-term leachate (0-100a).
- process-specific burdens, municipal waste incineration: 1.31819e-6, 3.34181e-6 kg (2 suppliers, which the file names only by identifier); sum of these 4.66e-6 kg; lognormal variance with pedigree 0.982, pedigree (1,1,5,5,1)
  (same comment as for municipal waste incineration facility)
- process-specific burdens, residual material landfill: 2.31957e-8, 5.88043e-8 kg (2 suppliers, which the file names only by identifier); sum of these 8.2e-8 kg; lognormal variance with pedigree 0.752, pedigree (1,1,5,5,1)
  burden from incineration of sludge from wastewater treatment of the short-term leachate (0-100a). uncertainty is calculated from uncertainties in waste composition and transfer coefficients in incinerator and uncertainty of waste decomposition and short-term leaching in sanitary landfill
  EcoSpold01Location=CH
- process-specific burdens, sanitary landfill: 1 kg; lognormal variance with pedigree 0.042, pedigree (1,1,5,5,1)
  demands per kilogram waste. uncertainty is heeded in the module
  EcoSpold01Location=CH
- process-specific burdens, slag landfill: 5.31804e-8, 1.3482e-7 kg (2 suppliers, which the file names only by identifier); sum of these 1.88e-7 kg; lognormal variance with pedigree 1.292, pedigree (1,1,5,5,1)
  (same comment as for cement, unspecified)
- residual material landfill: 1.71e-16 unit; lognormal variance with pedigree 0.752, pedigree (1,1,5,5,1)
  (same comment as for process-specific burdens, residual material landfill)
- sanitary landfill facility: 5.56e-10 unit; lognormal variance with pedigree 0.042, pedigree (1,1,5,5,1)
  EcoSpold01Location=CH
  demands per kilogram waste. uncertainty is heeded in the module
- sewer grid, 5E9l/year, 110 km: 5.45e-10 km; lognormal variance with pedigree 0.2106, pedigree (5,5,5,5,5)
  EcoSpold01Location=CH
  burden from wastewater treatment of the short-term leachate (0-100a). Uncertainty calculated from unertainty of the waste composition of this waste, uncertainty in waste decomposition and short-term leaching in sanitary landfill
  Uncertainty: . Uncertainty calculated from unertainty of the waste composition of this waste, uncertainty in waste decomposition and short-term leaching in sanitary landfill
- slag landfill: 3.34e-16 unit; lognormal variance with pedigree 1.292, pedigree (1,1,5,5,1)
  (same comment as for cement, unspecified)
- waste cement, hydrated: -2.31957e-8, -5.88043e-8 kg (2 suppliers, which the file names only by identifier); sum of these -8.2e-8 kg; lognormal variance with pedigree 0.712, pedigree (1,1,1,5,1)
  (same comment as for process-specific burdens, residual material landfill)
  production volume
    Calculated from the production volume of waste plastic plaster, 0% water, final disposal in proportion to the respective output amounts.
  properties: dry mass 1 kg, wet mass 1 kg
- waste graphical paper: -2.59179e-7, -4.09465e-6, -9.36524e-7, -9.13189e-8, -1.69726e-6, -1.69041e-7, -2.26629e-8, -3.15294e-5 kg (8 suppliers, which the file names only by identifier); sum of these -3.88e-5 kg; lognormal variance with pedigree 0.2106, pedigree (5,5,5,5,5)
  (same comment as for sewer grid, 5E9l/year, 110 km)
  production volume
    (same comment as for waste cement, hydrated)
  properties: carbon content, non-fossil 0.454955, dry mass 0.888 kg, heating value, net 14.12 MJ, water content 0.126126, wet mass 1 kg
  note on heating value, net: Value taken from the general comment of the treatment dataset.
- waste plastic, mixture: -2.18105e-8, -4.31618e-6, -1.19116e-7, -1.13112e-7, -2.88391e-7, -3.67759e-6, -4.81214e-8, -3.02157e-5 kg (8 suppliers, which the file names only by identifier); sum of these -3.88e-5 kg; lognormal variance with pedigree 0.2106, pedigree (5,5,5,5,5)
  (same comment as for sewer grid, 5E9l/year, 110 km)
  production volume
    (same comment as for waste cement, hydrated)
  properties: carbon content, fossil 0.747344, dry mass 0.847 kg, heating value, net 30.79 MJ, water content 0.180638, wet mass 1 kg
  note on carbon content, fossil: C content in 1 kg DM was calculated using data in Tab A.2, ecoinvent v2.2 report 13_I
- wastewater treatment facility, capacity 5E9l/year: 1.42e-11 unit; lognormal variance with pedigree 0.2106, pedigree (5,5,5,5,5)
  (same comment as for sewer grid, 5E9l/year, 110 km)

## Emissions to nature
- Cadmium II [air, non-urban air or from high stacks]: 1.48e-10 kg; lognormal variance with pedigree 2.522, pedigree (1,1,5,5,1)
  burden from direct release or incineration of landfill biogas. Uncertainty calculated from unertainty of the waste composition of this waste, uncertainty in waste decomposition and short-term leaching in sanitary landfill
- Cadmium II [air, urban air close to ground]: 6.09e-13 kg; lognormal variance with pedigree 1.922, pedigree (1,1,5,5,1)
  Emissions from short-term leachate treatment and incineration of resulting sludge. Uncertainty calculated depending on waste input and uncertainty of transfer coefficents in landfill, wastewater treatment and incineration model.
- Carbon dioxide, fossil [air, non-urban air or from high stacks]: 0.000641 kg; lognormal variance with pedigree 0.712, pedigree (1,1,5,5,1)
  (same comment as for Cadmium II)
- Carbon dioxide, fossil [air, urban air close to ground]: 2.14e-5 kg; lognormal variance with pedigree 1.172, pedigree (1,1,5,5,1)
  (same comment as for Cadmium II)
- Carbon monoxide, fossil [air, non-urban air or from high stacks]: 3.63e-8 kg; lognormal variance with pedigree 1.362, pedigree (1,1,5,5,1)
  (same comment as for Cadmium II)
- Carbon monoxide, fossil [air, urban air close to ground]: 1.38e-8 kg; lognormal variance with pedigree 1.232, pedigree (1,1,5,5,1)
  (same comment as for Cadmium II)
- Chromium III [air, non-urban air or from high stacks]: 1.1e-12 kg; lognormal variance with pedigree 3.142, pedigree (1,1,5,5,1)
  (same comment as for Cadmium II)
- Chromium III [air, urban air close to ground]: 1.61e-16 kg; lognormal variance with pedigree 2.182, pedigree (1,1,5,5,1)
  (same comment as for Cadmium II)
- Cobalt II [air, non-urban air or from high stacks]: 7.53e-11 kg; lognormal variance with pedigree 2.602, pedigree (1,1,5,5,1)
  (same comment as for Cadmium II)
- Cobalt II [air, urban air close to ground]: 4.71e-15 kg; lognormal variance with pedigree 1.632, pedigree (1,1,5,5,1)
  (same comment as for Cadmium II)
- Hydrochloric acid [air, non-urban air or from high stacks]: 3.43e-6 kg; lognormal variance with pedigree 1.202, pedigree (1,1,5,5,1)
  (same comment as for Cadmium II)
- Lead II [air, non-urban air or from high stacks]: 2.19e-12 kg; lognormal variance with pedigree 3.042, pedigree (1,1,5,5,1)
  (same comment as for Cadmium II)
- Lead II [air, urban air close to ground]: 2.17e-13 kg; lognormal variance with pedigree 2.072, pedigree (1,1,5,5,1)
  (same comment as for Cadmium II)
- Methane, fossil [air, non-urban air or from high stacks]: 9.82e-5 kg; lognormal variance with pedigree 0.762, pedigree (1,1,5,5,1)
  (same comment as for Cadmium II)
- Methane, fossil [air, urban air close to ground]: 4.19e-8 kg; lognormal variance with pedigree 1.232, pedigree (1,1,5,5,1)
  (same comment as for Cadmium II)
- Molybdenum VI [air, non-urban air or from high stacks]: 5.34e-12 kg; lognormal variance with pedigree 2.942, pedigree (1,1,5,5,1)
  (same comment as for Cadmium II)
- Molybdenum VI [air, urban air close to ground]: 2.1e-11 kg; lognormal variance with pedigree 1.902, pedigree (1,1,5,5,1)
  (same comment as for Cadmium II)
- NMVOC, non-methane volatile organic compounds [air, non-urban air or from high stacks]: 6.87e-10 kg; lognormal variance with pedigree 0.762, pedigree (1,1,5,5,1)
  (same comment as for Cadmium II)
- NMVOC, non-methane volatile organic compounds [air, urban air close to ground]: 1.9e-10 kg; lognormal variance with pedigree 1.342, pedigree (1,1,5,5,1)
  (same comment as for Cadmium II)
- Particulate Matter, < 2.5 um [air, non-urban air or from high stacks]: 1.22e-8 kg; lognormal variance with pedigree 1.022, pedigree (1,1,5,5,1)
  (same comment as for Cadmium II)
- Tin ion [air, non-urban air or from high stacks]: 1.98e-12 kg; lognormal variance with pedigree 3.052, pedigree (1,1,5,5,1)
  (same comment as for Cadmium II)
- Tin ion [air, urban air close to ground]: 6.1e-12 kg; lognormal variance with pedigree 2.032, pedigree (1,1,5,5,1)
  (same comment as for Cadmium II)
- Zinc II [air, non-urban air or from high stacks]: 6.13e-12 kg; lognormal variance with pedigree 2.922, pedigree (1,1,5,5,1)
  (same comment as for Cadmium II)
- Zinc II [air, urban air close to ground]: 3.11e-13 kg; lognormal variance with pedigree 1.892, pedigree (1,1,5,5,1)
  (same comment as for Cadmium II)
- Arsenic ion [water, ground-, long-term]: 1.48e-6 kg; lognormal variance with pedigree 1.562, pedigree (1,1,5,5,1)
  Emissions from long-term leachate (>100a) directly from MSW landfill and indirectly via incineration of treatement sludge from leachate treatement. Uncertainty calculated depending on waste input and uncertainty of long-term transfer coefficents in landfill.
- BOD5, Biological Oxygen Demand [water, ground-, long-term]: 0.00927 kg; lognormal variance with pedigree 0.602, pedigree (1,1,5,5,1)
  (same comment as for Arsenic ion)
- BOD5, Biological Oxygen Demand [water, surface water]: 1.48e-6 kg; lognormal variance with pedigree 1.182, pedigree (1,1,5,5,1)
  (same comment as for Cadmium II)
- COD, Chemical Oxygen Demand [water, ground-, long-term]: 0.0392 kg; lognormal variance with pedigree 0.602, pedigree (1,1,5,5,1)
  (same comment as for Arsenic ion)
- COD, Chemical Oxygen Demand [water, surface water]: 4.7e-6 kg; lognormal variance with pedigree 1.172, pedigree (1,1,5,5,1)
  (same comment as for Cadmium II)
- Cadmium II [water, ground-, long-term]: 1.27e-5 kg; lognormal variance with pedigree 1.282, pedigree (1,1,5,5,1)
  (same comment as for Arsenic ion)
- Cadmium II [water, surface water]: 1.13e-8 kg; lognormal variance with pedigree 1.862, pedigree (1,1,5,5,1)
  (same comment as for Cadmium II)
- Calcium II [water, ground-, long-term]: 0.381 kg; lognormal variance with pedigree 0.072, pedigree (1,1,5,5,1)
  (same comment as for Arsenic ion)
- Chloride [water, ground-, long-term]: 0.00921 kg; lognormal variance with pedigree 0.412, pedigree (1,1,5,5,1)
  (same comment as for Arsenic ion)
- Chloride [water, surface water]: 0.000238 kg; lognormal variance with pedigree 0.672, pedigree (1,1,5,5,1)
  Emissions from short-term leachate treatment. Uncertainty calculated depending on waste input and uncertainty of transfer coefficents in landfill and wastewater treatment.
- Chromium III [water, surface water]: 6.93e-12 kg; lognormal variance with pedigree 2.102, pedigree (1,1,5,5,1)
  (same comment as for Cadmium II)
- Chromium VI [water, ground-, long-term]: 1.94e-7 kg; lognormal variance with pedigree 8.392, pedigree (1,1,5,5,1)
  (same comment as for Arsenic ion)
- Chromium VI [water, surface water]: 2.31e-9 kg; lognormal variance with pedigree 2.062, pedigree (1,1,5,5,1)
  (same comment as for Cadmium II)
- Cobalt II [water, ground-, long-term]: 9.36e-5 kg; lognormal variance with pedigree 1.012, pedigree (1,1,5,5,1)
  (same comment as for Arsenic ion)
- Cobalt II [water, surface water]: 1.53e-7 kg; lognormal variance with pedigree 1.512, pedigree (1,1,5,5,1)
  (same comment as for Cadmium II)
- DOC, Dissolved Organic Carbon [water, ground-, long-term]: 0.0358 kg; lognormal variance with pedigree 0.602, pedigree (1,1,5,5,1)
  (same comment as for Arsenic ion)
- DOC, Dissolved Organic Carbon [water, surface water]: 1.14e-6 kg; lognormal variance with pedigree 1.182, pedigree (1,1,5,5,1)
  (same comment as for Cadmium II)
- Lead II [water, ground-, long-term]: 0.000114 kg; lognormal variance with pedigree 0.992, pedigree (1,1,5,5,1)
  (same comment as for Arsenic ion)
- Lead II [water, surface water]: 7.21e-10 kg; lognormal variance with pedigree 2.022, pedigree (1,1,5,5,1)
  (same comment as for Cadmium II)
- Mercury II [water, ground-, long-term]: 2.86e-8 kg; lognormal variance with pedigree 1.962, pedigree (1,1,5,5,1)
  (same comment as for Arsenic ion)
- Molybdenum VI [water, ground-, long-term]: 8e-6 kg; lognormal variance with pedigree 1.432, pedigree (1,1,5,5,1)
  (same comment as for Arsenic ion)
- Molybdenum VI [water, surface water]: 1.26e-8 kg; lognormal variance with pedigree 1.862, pedigree (1,1,5,5,1)
  (same comment as for Cadmium II)
- Nickel II [water, ground-, long-term]: 3.19e-6 kg; lognormal variance with pedigree 1.462, pedigree (1,1,5,5,1)
  (same comment as for Arsenic ion)
- TOC, Total Organic Carbon [water, ground-, long-term]: 0.0358 kg; lognormal variance with pedigree 0.602, pedigree (1,1,5,5,1)
  (same comment as for Arsenic ion)
- TOC, Total Organic Carbon [water, surface water]: 1.19e-6 kg; lognormal variance with pedigree 1.172, pedigree (1,1,5,5,1)
  (same comment as for Cadmium II)
- Tin ion [water, ground-, long-term]: 0.000134 kg; lognormal variance with pedigree 0.962, pedigree (1,1,5,5,1)
  (same comment as for Arsenic ion)
- Tin ion [water, surface water]: 3.31e-9 kg; lognormal variance with pedigree 1.992, pedigree (1,1,5,5,1)
  (same comment as for Cadmium II)
- Zinc II [water, ground-, long-term]: 6.61e-5 kg; lognormal variance with pedigree 1.042, pedigree (1,1,5,5,1)
  (same comment as for Arsenic ion)
- Zinc II [water, surface water]: 8.53e-9 kg; lognormal variance with pedigree 1.832, pedigree (1,1,5,5,1)
  (same comment as for Cadmium II)

## Sampling procedure
Landfill model based on observed leachate concentrations in literature. Extrapolated to 60'000 years heeding chemical characteristics. Initial waste composition from various literature sources.

## Extrapolations
This dataset has been copied from an original dataset covering the geography CH. The uncertainty has been adjusted accordingly.

## Review by Niels Jungbluth 2003-07-21
Passed. Calculation for standard deviation 95 of, i.e., infrastructure,
land occupation, transport services or other services can differ from
standard Pedigree approach used in this project and figures obtained by
this procedure.
