# cement plaster production, hand-mixed on site

Dataset: EcoSpold 2, unit process
Geography: RoW
Time period: 2014-04-01 to 2022-12-31
Technology level: current
Classification: ISIC rev.4 ecoinvent: 2395:Manufacture of articles of concrete, cement and plaster
Scenario: Business-as-Usual
System model: Allocation, cut-off by classification
Generated by: P V Kiran Ananth
Published in: Kiran Ananth P. V. 2017
Database: ecoinvent
isCopyrightProtected: true
accessRestrictedTo: 1

## General comment
Plastering is done on the walls to remove surface imperfections, maintain line level and alignment. In addition to that it also acts as a protective surface for external walls. Cement plaster, Gypsum plaster and Lime plaster are the commonly used plastering materials for house constructions. Cement plaster is made by mixing cement and sand in the proportions required. Cement plaster is applied to both interior and exterior walls to give them a smooth surface.
The differences between mortar and plaster lie in the capacity of plasters to take better finish, which depend to a very large extent on the type of sand used in the mix. For plasters we use finer sand. However in mortar we use coarse particles of sand.
Mix ratio is the volumetric mixing ratio of cement and aggregates. Mix Ratio varies from 1:3 to 1:6 depending upon the application area. The mix ratio accounted for this dataset is 1:6. This dataset considered hand-mixed on site production and its application is for plastering larger area like big buildings.

## Included activities start
Activities startes with reception of cement, aggregates and water at civil site.

## Included activities end
Activity ends with cement plaster, ready to be applied. The tap water consumption for cleaning the container and tools is excluded due to lack of data.

## Geography
The GLO dataset is extrapolated from the Indian dataset. The uncertainty has been adjusted accordingly.

## Technology
Mixing of cement, water and aggregates done by hand mixing.

## Time period
Data available for above period.

## Reference product
- cement plaster: 1 m3; By-product classification allocatable product; CPC 3741: Plasters
  production volume 8.2187e9 m3
  properties: carbon allocation 0 kg, carbon content 0, carbon content, fossil 0, carbon content, non-fossil 0, dry mass 1917 kg, price 1917 EUR2005, water content 0, water in wet mass 0 kg, wet mass 1917 kg

## Inputs from technosphere
- cement, CEM IV/A: 16.1806, 233.649, 0.170219 kg (3 suppliers, which the file names only by identifier); sum of these 250 kg; lognormal variance with pedigree 0.0055, pedigree (3,2,4,5,2)
  properties: dry mass 1 kg, wet mass 1 kg
- sand: 25.224, 1641.47, 0.302013 kg (3 suppliers, which the file names only by identifier); sum of these 1667 kg; lognormal variance with pedigree 0.0055, pedigree (3,2,4,5,2)
  properties: dry mass 1 kg, wet mass 1 kg
- tap water: 1.39259, 215.356, 160.812, 3.75152, 0.451583, 0.746314, 0.489574 kg (7 suppliers, which the file names only by identifier); sum of these 383 kg; lognormal variance with pedigree 0.0032, pedigree (3,3,3,1,1)
  properties: carbon content, fossil 0.00178991, dry mass 0.000337476 kg, water content 2962.17, wet mass 1 kg

## Emissions to nature
- Water [air, unspecified]: 0.3064 m3; lognormal variance with pedigree 0.0494, pedigree (4,3,4,1,4)
- Water [water, unspecified]: 0.0766 m3; lognormal variance with pedigree 0.0494, pedigree (4,3,4,1,4)

## Sampling procedure
Data collected by consulting with two cement plaster manufacturer and secondary research.

## Extrapolations
Extrapolated from the Indian dataset, uncertainty has been adjusted accordingly.
