# casting, brass

Dataset: EcoSpold 2, unit process
Geography: RoW
Time period: 1996-01-01 to 2022-12-31
Technology level: current
Classification: EcoSpold01Categories: metals/processing
Classification: ISIC rev.4 ecoinvent: 2432:Casting of non-ferrous metals
Tags: ConvertedDataset
Scenario: Business-as-Usual
System model: Allocation, cut-off by classification
Generated by: Hans-Jörg Althaus
Published in: Althaus H.-J. 2000
Database: ecoinvent
isCopyrightProtected: true
accessRestrictedTo: 1

## General comment
All data are calculated based on assumptions and theoretical models. Their overall quality is poor.
[This dataset was already contained in the ecoinvent database version 2. It was not individually updated during the transfer to ecoinvent version 3. Life Cycle Impact Assessment results may still have changed, as they are affected by changes in the supply chain, i.e. in other datasets. This dataset was generated following the ecoinvent quality guidelines for version 2. It may have been subject to central changes described in the ecoinvent version 3 change report (http://www.ecoinvent.org/database/ecoinvent-version-3/reports-of-changes/), and the results of the central updates were reviewed extensively. The changes added e.g. consistent water flows and other information throughout the database. The documentation of this dataset can be found in the ecoinvent reports of version 2, which are still available via the ecoinvent website. The change report linked above covers all central changes that were made during the conversion process.]

## Included activities end
melting of copper and zinc and casting of brass parts. Metal input is not included.

## Geography
Data relate to the European average.

## Technology
Assumed energy mix for melting. Abatement of air emissions assumed

## Reference product
- casting, brass: 1 kg; By-product classification allocatable product; CPC 89320: Non-ferrous metal casting services
  production volume 1.6119e9 kg
  properties: carbon allocation 0 kg, carbon content 0, price 0.0114524 EUR2005

## Inputs from technosphere
- aluminium casting facility: 4.9e-11 unit; lognormal variance with pedigree 0.42, pedigree (4,5,5,5,4)
- electricity, medium voltage: 0.000791558, 0.00116383, 0.000584083, 0.0106782, 0.000176843, 3.46588e-5, 0.00254097, 0.00372984 kWh (8 suppliers, which the file names only by identifier); sum of these 0.0197 kWh; lognormal variance with pedigree 0.11, pedigree (4,5,5,5,4)
- heat, district or industrial, natural gas: 0.25546, 0.00419786, 0.0943423 MJ (3 suppliers, which the file names only by identifier); sum of these 0.354 MJ; lognormal variance with pedigree 0.11, pedigree (4,5,5,5,4)
  properties: heating value, net 1 MJ
- heat, district or industrial, other than natural gas: 0.275853, 0.000127797, 0.0070196 MJ (3 suppliers, which the file names only by identifier); sum of these 0.283 MJ; lognormal variance with pedigree 0.11, pedigree (4,5,5,5,4)
  properties: heating value, net 1 MJ

## Emissions to nature
- Zinc II [air, unspecified]: 0.000303 kg; lognormal variance with pedigree 0.16, pedigree (4,5,5,5,4)

## Sampling procedure
based on literature and internet

## Extrapolations
none This dataset has been copied from an original dataset covering the geography CH. The uncertainty has been adjusted accordingly.

## Review by Roland Hischier 2003-06-12
Passed.
