# lubricating oil production

Dataset: EcoSpold 2, unit process
Geography: RoW
Time period: 2000-01-01 to 2022-12-31
Technology level: current
Classification: ISIC rev.4 ecoinvent: 1920:Manufacture of refined petroleum products
Scenario: Business-as-Usual
System model: Allocation, cut-off by classification
Generated by: Roland Hischier
Published in: Althaus H.-J. 2007
Database: ecoinvent
isCopyrightProtected: true
accessRestrictedTo: 1

## General comment
This dataset represents the production of 1 kg of liquid lubricating oil, including additives.
The most important function of lubricants is the reduction of friction and wear. Apart from important applications in internal combustion engines, vehicle and industrial gearboxes, compressors, turbines, or hydraulic systems, there are a vast number of other applications which mostly require specifically tailored lubricants. In terms of quantity, mineral oil components continue to be the most important ingredients of lubricants. Petrochemical components and, increasingly, derivatives of natural, harvestable raw materials from the oleo-chemical industry are finding increasing acceptance because of their environmental compatibility and some technical advantages.
This dataset is based on literature and industrial data. The additives included in the lubricating oil are based on Raimondi et al. (2012). The energy consumption is approximated based on data from a large chemical factory (Gendorf 2016).
References:
Mang, T., Noll, S. and Bartels, T. 2011. Lubricants, 1. Fundamentals of Lubricants and Lubrication. Ullmann's Encyclopedia of Industrial Chemistry.
Andrea Raimondi, Giorgia Girotti, Gian Andrea Blengini and Debora Fino (2012) LCA of petroleum-based lubricants: state of art and inclusion of additives. Int J Life Cycle Assess (2012) 17:987–996.
Gendorf (2016) Umwelterklärung 2015, Werk Gendorf Industriepark, www.gendorf.de.

## Included activities start
From the reception of diesel at the factory gate.

## Included activities end
This activity ends with 1 kg of lubricating oil at the factory gate. The dataset includes the input materials, energy uses, infrastructure and emissions.

## Geography
The data used has no specific geographical origin as it is based on literature and estimations. The energy consumption is based on data from a large chemical factory located in Germany. These are assumed to be valid for this geography.

## Technology
A huge variety of different compositions are known under the name “lubricants” – actually, 5’000 to 10’000 different formulations are used to satisfy about 90% of the different lubricants applications. In terms of quantity, mineral oil components continue to be the most important ingredients. But more and more, derivatives of natural, harvestable raw materials from the oleo-chemical sector are finding their acceptance within the used substances.
In 1999 around 37 Mt of lubricants have been consumed – thereof more than half in the automotive sector (56%), and another 29% as industrial lubricants. This amount is produced by around 1700 producers worldwide. Thereof, about 200 are vertically-integrated petroleum companies where lubricants are only a minor part of their profit. Nevertheless, less than 2% of all lubricant manufacturers are producing more than 60% of the total production volume. In case of the remaining 1500 companies, lubricants are their core business.
In terms of the volume, base oils are the most important parts of lubricants. The rest is composed of additives. For this dataset, the additives are based on data published in Raimondi et al. (2012).
The image above represents the typical yields of the different cuts from a conventional lubricating oil refining process
To achieve base oils, a variety of different steps have to be done starting with the crude oil that is extracted until the right components are isolated. Different steps therefore are for example refining, distillation, de-asphalting, traditional refining process, solvent dewaxing or finishing. Additional steps that are often used are as well hydrogenation and hydrocracking operations.
Based on the fact that a multitude of different processes are possible for the production of lubricants, the following choices are done for this dataset – with the aim to create a typical dataset for petrochemical lubricants – called “lubricants”:
- Hydrocracking as basic technology for the extraction of the lubricant oils due to the fact that according to Bartels et al. (2003) more than 50% of the new manufacturing plants work with this principle.
- Distillation and dewaxing as subsequent process steps to achieve high-quality base lubricant oils
- Diesel as input due to the fact that these hydrocracker need low-sulphur oils.
References:
Bartels T., Bock W., Braun J., Busch C., Dresel W., Freiler C., Harperscheid M., Heckler R.-P., Hörner D., Kubicki F., Lingg G., Losch A., Luther R., Mang T., Noll S. and Omeis J. (2003) Lubricants and Lubrication. In: Ullmann's Encyclopedia of Industrial Chemistry, Sixth Edition, 2003 Electronic Release (ed. Häussinger P., Leitgeb P. and Schmücker B.), 6 th Electronic Release Edition. Wiley InterScience, New York, Online-Version under: http://www.mrw.interscience.wiley.com/ueic/ull_search_fs.html.
Andrea Raimondi, Giorgia Girotti, Gian Andrea Blengini and Debora Fino (2012) LCA of petroleum-based lubricants: state of art and inclusion of additives. Int J Life Cycle Assess (2012) 17:987–996.

## Time period
Date of published literature. The energy consumption is based on data published by the Gendorf factory that were collected between 2011 and 2015. The time period has been adjusted accordingly. For more details, see the comments of the exchanges.

## Reference product
- lubricating oil: 1 kg; By-product classification allocatable product; CPC 33380: Lubricants
  production volume 3.41964e10 kg
  properties: carbon allocation 0.75 kg, carbon content 0.75, carbon content, fossil 0.75, carbon content, non-fossil 0, dry mass 1 kg, heating value, net 40.2 MJ, price 2.92 EUR2005, water content 0, water in wet mass 0 kg, wet mass 1 kg

## Inputs from technosphere
- alkylbenzene sulfonate, linear, petrochemical: 0.0204082 kg; lognormal variance with pedigree 0.1786, pedigree (4,5,5,5,5)
  properties: carbon content, fossil 0.407018, dry mass 1 kg, heating value, net 28.88 MJ, wet mass 1 kg
- chemical factory, organics: 4e-10 unit; lognormal variance with pedigree 0.3098, pedigree (2,3,2,4,3)
- diesel: 0.00714629, 0.696995, 0.0349739, 0.00168134, 0.00494422, 0.0705854 kg (6 suppliers, which the file names only by identifier); sum of these 0.816327 kg; lognormal variance with pedigree 0.1786, pedigree (4,5,5,5,5)
  properties: carbon content, fossil 0.865, dry mass 1 kg, heating value, net 42.8 MJ, wet mass 1 kg
- electricity, medium voltage: 0.0295802, 0.0148452, 0.271401, 0.0044947, 0.000880897, 0.0947985 kWh (6 suppliers, which the file names only by identifier); sum of these 0.416 kWh; lognormal variance with pedigree 0.0104, pedigree (2,3,2,4,3)
- heat, district or industrial, natural gas: 2.11524, 0.0347588 MJ (2 suppliers, which the file names only by identifier); sum of these 2.15 MJ; lognormal variance with pedigree 0.0104, pedigree (2,3,2,4,3)
  properties: heating value, net 1 MJ
- heat, from steam, in chemical industry: 0.2 MJ; lognormal variance with pedigree 0.0104, pedigree (2,3,2,4,3)
  properties: heating value, net 1 MJ
- hydrogen sulfide: 0.00357143 kg; lognormal variance with pedigree 0.1786, pedigree (4,5,5,5,5)
  properties: dry mass 1 kg, heating value, net 7.11 MJ, wet mass 1 kg
- isobutanol: 0.0147959 kg; lognormal variance with pedigree 0.1786, pedigree (4,5,5,5,5)
  properties: carbon content, fossil 0.648649, dry mass 1 kg, heating value, net 35.99 MJ, wet mass 1 kg
- n-olefins: 0.0918367 kg; lognormal variance with pedigree 0.1786, pedigree (4,5,5,5,5)
  properties: carbon content, fossil 0.876404, dry mass 1 kg, heating value, net 45 MJ, wet mass 1 kg
- phenol: 0.00510204 kg; lognormal variance with pedigree 0.1786, pedigree (4,5,5,5,5)
  properties: carbon content, fossil 0.765957, dry mass 1 kg, heating value, net 30.93 MJ, wet mass 1 kg
- phosphorous chloride: 0.00357143 kg; lognormal variance with pedigree 0.1786, pedigree (4,5,5,5,5)
  properties: dry mass 1 kg, wet mass 1 kg
- synthetic rubber: 0.0612245 kg; lognormal variance with pedigree 0.1786, pedigree (4,5,5,5,5)
  properties: carbon content, fossil 0.871949, dry mass 1 kg, heating value, net 26.42 MJ, wet mass 1 kg
- zinc oxide: 0.00357143 kg; lognormal variance with pedigree 0.1786, pedigree (4,5,5,5,5)
  properties: dry mass 1 kg, wet mass 1 kg

## Emissions to nature
- NMVOC, non-methane volatile organic compounds [air, urban air close to ground]: 0.0204082 kg; lognormal variance with pedigree 0.33, pedigree (5,5,5,5,5)

## Sampling procedure
Data based on literature and estimations. The energy consumption is based on data from a large chemical factory located in Germany. The process emissions are based on estimations only.

## Extrapolations
This dataset has been copied from an original dataset covering the geography RER. The uncertainty has been adjusted accordingly.

## Review by Emilia Moreno Ruiz 2017-08-10
This dataset was additionally reviewed in a separate review process by Eric Johnson of Atlantic Consulting as well as Emilia Moreno Ruiz and Gregor Wernet of ecoinvent.
