# vinyl acetate production

Dataset: EcoSpold 2, unit process
Geography: RoW
Time period: 2000-01-01 to 2022-12-31
Technology level: current
Classification: ISIC rev.4 ecoinvent: 2013:Manufacture of plastics and synthetic rubber in primary forms
Classification: EcoSpold01Categories: plastics/monomers
Tags: ConvertedDataset
Scenario: Business-as-Usual
System model: Allocation, cut-off by classification
Generated by: Roland Hischier
Published in: Hischier R. 2007
Database: ecoinvent
isCopyrightProtected: true
accessRestrictedTo: 1

## General comment
The functional unit represent 1 kg of liquid vinyl acetate. Large uncertainty of the process data due to weak data on the production process and missing data on process emissions.
[This dataset was already contained in the ecoinvent database version 2. It was not individually updated during the transfer to ecoinvent version 3. Life Cycle Impact Assessment results may still have changed, as they are affected by changes in the supply chain, i.e. in other datasets. This dataset was generated following the ecoinvent quality guidelines for version 2. It may have been subject to central changes described in the ecoinvent version 3 change report (http://www.ecoinvent.org/database/ecoinvent-version-3/reports-of-changes/), and the results of the central updates were reviewed extensively. The changes added e.g. consistent water flows and other information throughout the database. The documentation of this dataset can be found in the ecoinvent reports of version 2, which are still available via the ecoinvent website. The change report linked above covers all central changes that were made during the conversion process.]

## Included activities end
Raw materials and chemicals used for production, transport of materials to manufacturing plant, estimated emissions to air and water from production (incomplete), estimation of energy demand and infrastructure of the plant (approximation). Solid wastes omitted.

## Geography
Data used has no specific geographical origin (stoechiometry). Average europenan processes for raw materials, transport requirements and electricity mix used.

## Technology
Production out of ethylene and acetic acid with the aid of oxygen and a catalyst, resulting in a yield of 94% (ethylene) up to 99% (acetic acid). Inventory bases on stoechiometric calculations. The emissions to air (0.2 wt.% of raw material input) and water were estimated using mass balance. Treatment of the waste water in a internal waste water treatment plant assumed (elimination efficiency of 90% for C).

## Time period
date of published literature

## Parameters
- fraction, cooling water, cooling pond system, to air: 0.032 dimensionless; name fraction_CW_CP_to_air; lognormal variance with pedigree 0.0413, pedigree (2,3,1,3,1)
  Calculated based on literature value (Scown, C.D., 2011, Water Footprint of U.S. Transportation Fuels and supplying information of the article) (Vionnet, S., Quantis Water Database - Technical Report, 2012).
- fraction, cooling water, once-through system, to air: 0.004 dimensionless; name fraction_CW_OT_to_air; lognormal variance with pedigree 0.0413, pedigree (2,3,1,3,1)
  (same comment as for fraction, cooling water, cooling pond system, to air)
- fraction, cooling water, recirculating system, to air: 0.771 dimensionless; name fraction_CW_R_to_air; lognormal variance with pedigree 0.0413, pedigree (2,3,1,3,1)
  (same comment as for fraction, cooling water, cooling pond system, to air)
- fraction, cooling water, to air: 0.3875 dimensionless; name fraction_CW_to_air; = (0.5*fraction_CW_OT_to_air)+(0.5*fraction_CW_R_to_air); lognormal variance with pedigree 0.092025, pedigree (4,4,3,2,4)
  Calculated value based on literature value (see comments of the other parametres present in this dataset) and expert opinion. In the case when no industry/literature data are available about the type of cooling or directly fraction, cooling water, to air specific for the process a default assumption is applied. It is assumed that the once-through cooling system is used in 50% of all cases and recirculating system is used in another 50% of all cases.
- fraction, process water, to air: 0.205 dimensionless; lognormal variance with pedigree 0.092025, pedigree (4,4,3,2,4)

## Reference product
- vinyl acetate: 1 kg; By-product classification allocatable product; CPC 34790: Other plastics in primary forms; ion exchangers
  production volume 2.67763 kg
  properties: carbon allocation 0.55814 kg, carbon content 0.55814, carbon content, fossil 0.55814, carbon content, non-fossil 0, dry mass 1 kg, heating value, net 25.35 MJ, price 0.74 EUR2005, water content 0, water in wet mass 0 kg, wet mass 1 kg

## Inputs from technosphere
- acetic acid, without water, in 98% solution state: 0.705 kg; lognormal variance with pedigree 0.1786, pedigree (4,5,5,5,5)
  properties: carbon content, fossil 0.400016, dry mass 1 kg, heating value, net 14.6 MJ, wet mass 1 kg
- chemical factory, organics: 4e-10 unit; lognormal variance with pedigree 0.548, pedigree (4,5,5,5,5)
- electricity, medium voltage: 0.0236784, 0.0118833, 0.217251, 0.00359792, 0.000705141, 0.0758844 kWh (6 suppliers, which the file names only by identifier); sum of these 0.333 kWh; lognormal variance with pedigree 0.17, pedigree (5,5,5,5,4)
- ethylene: 0.32971, 0.00529011 kg (2 suppliers, which the file names only by identifier); sum of these 0.335 kg; lognormal variance with pedigree 0.1786, pedigree (4,5,5,5,5)
  properties: carbon content, fossil 0.857143, dry mass 1 kg, heating value, net 43.22 MJ, wet mass 1 kg
- heat, district or industrial, natural gas: 1.1806, 0.0194003 MJ (2 suppliers, which the file names only by identifier); sum of these 1.2 MJ; lognormal variance with pedigree 0.17, pedigree (5,5,5,5,4)
  properties: heating value, net 1 MJ
- oxygen, liquid: 0.196 kg; lognormal variance with pedigree 0.1786, pedigree (4,5,5,5,5)
  properties: dry mass 1 kg, wet mass 1 kg

## Inputs from nature
- Water, cooling, unspecified natural origin [natural resource, in water]: 0.024 m3; lognormal variance with pedigree 0.17, pedigree (5,5,5,5,4)
- Water, unspecified natural origin [natural resource, in water]: 0.012 m3; lognormal variance with pedigree 0.17, pedigree (5,5,5,5,4)

## Emissions to nature
- Acetic acid [air, urban air close to ground]: 0.00141 kg; lognormal variance with pedigree 0.33, pedigree (5,5,5,5,5)
- Carbon dioxide, fossil [air, urban air close to ground]: 0.0623 kg; lognormal variance with pedigree 0.2, pedigree (5,5,5,5,4)
- Ethylene [air, urban air close to ground]: 0.00067 kg; lognormal variance with pedigree 0.33, pedigree (5,5,5,5,5)
- Water [air, unspecified]: 0.01176 m3; lognormal variance with pedigree 0.0427, pedigree (2,2,5,5,1)
- Acetic acid [water, surface water]: 0.000564 kg; lognormal variance with pedigree 0.51, pedigree (5,5,5,5,4)
- BOD5, Biological Oxygen Demand [water, surface water]: 0.00696 kg; lognormal variance with pedigree 0.23, pedigree (5,5,5,5,4)
- COD, Chemical Oxygen Demand [water, surface water]: 0.00696 kg; lognormal variance with pedigree 0.23, pedigree (5,5,5,5,4)
- DOC, Dissolved Organic Carbon [water, surface water]: 0.00189 kg; lognormal variance with pedigree 0.23, pedigree (5,5,5,5,4)
- Ethylene [water, surface water]: 0.00194 kg; lognormal variance with pedigree 0.51, pedigree (5,5,5,5,4)
- TOC, Total Organic Carbon [water, surface water]: 0.00189 kg; lognormal variance with pedigree 0.23, pedigree (5,5,5,5,4)
- Water [water, unspecified]: 0.02424 m3; lognormal variance with pedigree 0.0427, pedigree (2,2,5,5,1)

## Sampling procedure
Process data based on stoechiometric calculations of few literature sources. Energy demand based on approximation from large chemical plant. Process emissions based on estimations only.

## Extrapolations
This dataset has been copied from an original dataset covering the geography RER. The uncertainty has been adjusted accordingly.

## Review by Mischa Classen 2003-06-19
passed
