# planning, cogen unit mini CHP plant

Dataset: EcoSpold 2, unit process
Geography: RoW
Time period: 1997-01-01 to 2022-12-31
Technology level: current
Classification: ISIC rev.4 ecoinvent: 7110:Architectural and engineering activities and related technical consultancy
Classification: EcoSpold01Categories: natural gas/cogeneration
Tags: ConvertedDataset
Scenario: Business-as-Usual
System model: Allocation, cut-off by classification
Generated by: Thomas Heck
Published in: Heck, T. 2007
Database: ecoinvent
isCopyrightProtected: true
accessRestrictedTo: 1

## General comment
Inventory based on information from manufacturer (Ecopower 1997; Ecopower 2001).
[This dataset was already contained in the ecoinvent database version 2. It was not individually updated during the transfer to ecoinvent version 3. Life Cycle Impact Assessment results may still have changed, as they are affected by changes in the supply chain, i.e. in other datasets. This dataset was generated following the ecoinvent quality guidelines for version 2. It may have been subject to central changes described in the ecoinvent version 3 change report (http://www.ecoinvent.org/database/ecoinvent-version-3/reports-of-changes/), and the results of the central updates were reviewed extensively. The changes added e.g. consistent water flows and other information throughout the database. The documentation of this dataset can be found in the ecoinvent reports of version 2, which are still available via the ecoinvent website. The change report linked above covers all central changes that were made during the conversion process.]

## Included activities end
The module includes the most important materials used for production. It includes also the transport of these materials and the energy and water needed for production.

## Geography
Could be used for central European conditions.

## Technology
Specific manufacturer (Ecopower in Switzerland)

## Reference product
- planning, cogen unit mini CHP plant: 1 unit; By-product classification allocatable product; CPC 83: Professional, technical and business services (except research, development, legal and accounting services)
  production volume 3.96633 unit
  properties: carbon allocation 0 kg, carbon content 0, price 101.69 EUR2005

## Inputs from technosphere
- electricity, medium voltage: 13.2596, 19.4956, 9.78414, 178.874, 2.96235, 0.580579, 42.5645, 62.4795 kWh (8 suppliers, which the file names only by identifier); sum of these 330 kWh; lognormal variance with pedigree 0.0866, pedigree (3,3,5,5,4)
- heat, district or industrial, other than natural gas: 2666.9, 1.23553, 67.8644 MJ (3 suppliers, which the file names only by identifier); sum of these 2736 MJ; lognormal variance with pedigree 0.0866, pedigree (3,3,5,5,4)
  properties: heating value, net 1 MJ
- transport, passenger car: 250 km; lognormal variance with pedigree 0.212, pedigree (1,1,5,5,1)

## Sampling procedure
Operator and manufacturer information

## Extrapolations
none This dataset has been copied from an original dataset covering the geography CH. The uncertainty has been adjusted accordingly.

## Review by Gerald Rebitzer (obsolete) 2003-08-27
had passed
