# petrol blending for two-stroke engines

Dataset: EcoSpold 2, unit process
Geography: RoW
Time period: 1989-01-01 to 2022-12-31
Technology level: current
Classification: EcoSpold01Categories: oil/fuels
Classification: ISIC rev.4 ecoinvent: 1920:Manufacture of refined petroleum products
Tags: ConvertedDataset
Scenario: Business-as-Usual
System model: Allocation, cut-off by classification
Generated by: Niels Jungbluth
Published in: Jungbluth, N. 2007
Database: ecoinvent
isCopyrightProtected: true
accessRestrictedTo: 1

## General comment
Rough estimation. Other mixing ratios from 1:5 up to 1:100 are possible. Energy use for mixing and additional fugitive emissions from mixing are neglected.
[This dataset was already contained in the ecoinvent database version 2. It was not individually updated during the transfer to ecoinvent version 3. Life Cycle Impact Assessment results may still have changed, as they are affected by changes in the supply chain, i.e. in other datasets. This dataset was generated following the ecoinvent quality guidelines for version 2. It may have been subject to central changes described in the ecoinvent version 3 change report (http://www.ecoinvent.org/database/ecoinvent-version-3/reports-of-changes/), and the results of the central updates were reviewed extensively. The changes added e.g. consistent water flows and other information throughout the database. The documentation of this dataset can be found in the ecoinvent reports of version 2, which are still available via the ecoinvent website. The change report linked above covers all central changes that were made during the conversion process.]

## Included activities end
Mixing of lubricant and petrol (ratio 1:50) at the petrol station.

## Geography
RER

## Technology
Mixing of two-stroke petrol at the fuel station.

## Time period
Literature, environmental reports and other information.

## Reference product
- petrol, two-stroke blend: 1 kg; By-product classification allocatable product; CPC 333: Petroleum oils and oils obtained from bituminous materials, other than crude; preparations n.e.c. containing by […]
  production volume 2.67763 kg
  properties: carbon allocation 0.865 kg, carbon content 0.865, carbon content, fossil 0.865, carbon content, non-fossil 0, dry mass 1 kg, heating value, net 43.2 MJ, price 0.71 EUR2005, water content 0, water in wet mass 0 kg, wet mass 1 kg

## Inputs from technosphere
- lubricating oil: 0.02 kg; lognormal variance with pedigree 0.0146, pedigree (3,3,5,5,1)
  properties: carbon content, fossil 0.75, dry mass 1 kg, heating value, net 40.2 MJ, wet mass 1 kg
- petrol, unleaded: 0.00782484, 0.00161185, 0.00785034, 0.0292727, 0.0324437, 0.900997 kg (6 suppliers, which the file names only by identifier); sum of these 0.98 kg; lognormal variance with pedigree 0.002, pedigree (1,1,5,5,1)
  properties: carbon content, fossil 0.865, dry mass 1 kg, heating value, net 43.2 MJ, wet mass 1 kg

## Sampling procedure
Own estimation based on mixing ratio.

## Extrapolations
none This dataset has been copied from an original dataset covering the geography RER. The uncertainty has been adjusted accordingly.

## Review by Michael Spielmann (obsolete) 2003-07-04
passed.
