# acetanilide production

Dataset: EcoSpold 2, unit process
Geography: RoW
Time period: 2010-01-01 to 2022-12-31
Technology level: current
Classification: ISIC rev.4 ecoinvent: 2011:Manufacture of basic chemicals
Synonyms: C8H9NO
Scenario: Business-as-Usual
System model: Allocation, cut-off by classification
Share of production covered: 100 %
Generated by: Jürgen Sutter
Database: ecoinvent
isCopyrightProtected: true
accessRestrictedTo: 1

## General comment
The process "acetanilide, at plant, GLO" is modelled for the production of acetanilide from aniline. Raw materials are modelled with a stoechiometric calculation. Emissions are estimated. Energy consumptions, infrastructure and transports are calculated with standard values.
Acetanilide (C6H5NHCOCH3; CAS 103-84-4, N-phenylacetamide, acetylaniline) is a colourless, glossy, crystalline material. Acetanilide is produced by heating aniline with acetic acid, acetic anhydride, or acetyl chloride.
C6H7N + C2H4O2 → C8H9NO + H2O
Frischknecht R., Jungbluth N., Althaus H.-J., Doka G., Dones R., Heck T., Hellweg S., Hischier R., Nemecek T., Rebitzer G. and Spielmann M. (2007) Overview and Methodology. Final report ecoinvent v2.0 No. 1. Swiss Centre for Life Cycle Inventories, Dübendorf, CH, retrieved from: www.ecoinvent.org.
Gendorf (2000) Umwelterklärung 2000, Werk Gendorf. Werk Gendorf, Burgkirchen as pdf-File under: http://www.gendorf.de/pdf/umwelterklaerung2000.pdf
Thomas Kahl, Kai-Wilfrid Schröder, F. R. Lawrence, W. J. Marshall, Hartmut Höke, Rudolf Jäckh: Aniline. Pub-lished online: 2000. In: Ullmann's Encyclopedia of Industrial Chemistry, Seventh Edition, 2004 Electronic Release (ed. Fiedler E., Grossmann G., Kersebohm D., Weiss G. and Witte C.). 7 th Electronic Release Edition. Wiley InterScience, New York, DOI: 10.1002/14356007.a02_303

## Included activities end
Production of acetanilide including materials, energy uses, infrastructure and emissions.

## Geography
The inventory is modelled for the world

## Technology
Reaction of aniline and acetic acid

## Time period
Time of publications

## Parameters
- fraction, cooling water, cooling pond system, to air: 0.032 dimensionless; name fraction_CW_CP_to_air; lognormal variance with pedigree 0.0413, pedigree (2,3,1,3,1)
  Calculated based on literature value (Scown, C.D., 2011, Water Footprint of U.S. Transportation Fuels and supplying information of the article) (Vionnet, S., Quantis Water Database - Technical Report, 2012).
- fraction, cooling water, once-through system, to air: 0.004 dimensionless; name fraction_CW_OT_to_air; lognormal variance with pedigree 0.0413, pedigree (2,3,1,3,1)
  (same comment as for fraction, cooling water, cooling pond system, to air)
- fraction, cooling water, recirculating system, to air: 0.771 dimensionless; name fraction_CW_R_to_air; lognormal variance with pedigree 0.0413, pedigree (2,3,1,3,1)
  (same comment as for fraction, cooling water, cooling pond system, to air)
- fraction, cooling water, to air: 0.3875 dimensionless; name fraction_CW_to_air; = (0.5*fraction_CW_OT_to_air)+(0.5*fraction_CW_R_to_air); lognormal variance with pedigree 0.092025, pedigree (4,4,3,2,4)
  Calculated value based on literature value (see comments of the other parametres present in this dataset) and expert opinion. In the case when no industry/literature data are available about the type of cooling or directly fraction, cooling water, to air specific for the process a default assumption is applied. It is assumed that the once-through cooling system is used in 50% of all cases and recirculating system is used in another 50% of all cases.

## Reference product
- acetanilide: 1 kg; By-product classification allocatable product; CPC 341: Basic organic chemicals
  production volume 1.7e6 kg
  properties: carbon allocation 0.710891 kg, carbon content 0.710891, carbon content, fossil 0.710891, carbon content, non-fossil 0, dry mass 1 kg, heating value, net 29.61 MJ, price 1.3096 EUR2005, water content 0, water in wet mass 0 kg, wet mass 1 kg

## Inputs from technosphere
- acetic acid, without water, in 98% solution state: 0.46784 kg; lognormal variance with pedigree 0.0255, pedigree (4,5,4,1,1)
  properties: carbon content, fossil 0.400016, dry mass 1 kg, heating value, net 14.6 MJ, wet mass 1 kg
- aniline: 0.72515 kg; lognormal variance with pedigree 0.0255, pedigree (4,5,4,1,1)
  properties: carbon content, fossil 0.774194, dry mass 1 kg, heating value, net 32.56 MJ, wet mass 1 kg
- chemical factory, organics: 4e-10 unit; lognormal variance with pedigree 0.3184, pedigree (4,5,5,5,5)
- electricity, medium voltage: 0.0236784, 0.0118833, 0.217251, 0.00359792, 0.000705141, 0.0758844 kWh (6 suppliers, which the file names only by identifier); sum of these 0.333 kWh; lognormal variance with pedigree 0.1786, pedigree (4,5,5,5,5)
- heat, from steam, in chemical industry: 2 MJ; lognormal variance with pedigree 0.1786, pedigree (4,5,5,5,5)
  properties: heating value, net 1 MJ

## Inputs from nature
- Water, cooling, unspecified natural origin [natural resource, in water]: 0.024 m3; lognormal variance with pedigree 0.0255, pedigree (4,5,4,1,1)

## Emissions to nature
- Acetic acid [air, urban air close to ground]: 0.00093567 kg; lognormal variance with pedigree 0.1786, pedigree (4,5,5,5,5)
- Aniline [air, urban air close to ground]: 0.0014503 kg; lognormal variance with pedigree 0.1786, pedigree (4,5,5,5,5)
- Carbon dioxide, fossil [air, urban air close to ground]: 0.11857 kg; lognormal variance with pedigree 0.1786, pedigree (4,5,5,5,5)
- Water [air, unspecified]: 0.0093 m3; lognormal variance with pedigree 0.092025, pedigree (4,4,5,2,4)
- Acetic acid [water, surface water]: 0.0022456 kg; lognormal variance with pedigree 0.3184, pedigree (4,5,5,5,5)
- Aniline [water, surface water]: 0.0034807 kg; lognormal variance with pedigree 0.3184, pedigree (4,5,5,5,5)
- BOD5, Biological Oxygen Demand [water, surface water]: 0.01 kg; lognormal variance with pedigree 0.1786, pedigree (4,5,5,5,5)
- COD, Chemical Oxygen Demand [water, surface water]: 0.01 kg; lognormal variance with pedigree 0.1786, pedigree (4,5,5,5,5)
- DOC, Dissolved Organic Carbon [water, surface water]: 0.00359 kg; lognormal variance with pedigree 0.1786, pedigree (4,5,5,5,5)
- TOC, Total Organic Carbon [water, surface water]: 0.00359 kg; lognormal variance with pedigree 0.1786, pedigree (4,5,5,5,5)
- Water [water, unspecified]: 0.0147 m3; lognormal variance with pedigree 0.092025, pedigree (4,4,5,2,4)

## Sampling procedure
Literature data

## Extrapolations
Emissions are modelled with standard methods.
