# stone meal production

Dataset: EcoSpold 2, unit process
Geography: RoW
Time period: 2000-01-01 to 2022-12-31
Technology level: current
Classification: EcoSpold01Categories: agricultural means of production/mineral fertiliser
Classification: ISIC rev.4 ecoinvent: 0891:Mining of chemical and fertilizer minerals
Tags: ConvertedDataset
Scenario: Business-as-Usual
System model: Allocation, cut-off by classification
Generated by: Angelika Heil
Published in: Nemecek, T. 2007
Database: ecoinvent
isCopyrightProtected: true
accessRestrictedTo: 1

## General comment
Values originate from a single producer of stone meal in Switzerland, which, however, can be considered typical for the Swiss market.
[This dataset was already contained in the ecoinvent database version 2. It was not individually updated during the transfer to ecoinvent version 3. Life Cycle Impact Assessment results may still have changed, as they are affected by changes in the supply chain, i.e. in other datasets. This dataset was generated following the ecoinvent quality guidelines for version 2. It may have been subject to central changes described in the ecoinvent version 3 change report (http://www.ecoinvent.org/database/ecoinvent-version-3/reports-of-changes/), and the results of the central updates were reviewed extensively. The changes added e.g. consistent water flows and other information throughout the database. The documentation of this dataset can be found in the ecoinvent reports of version 2, which are still available via the ecoinvent website. The change report linked above covers all central changes that were made during the conversion process.]

## Included activities end
Stone meal is a by-product (filter residue) of stone mining. Energy requirements for further processing required to obtain a commercial stone meal fertiliser were included. In addition, transports from the manufacturer to the regional storehouse were taken into consideration. Infrastructure and land use were included by means of a proxy-module.

## Geography
The values refer to the market situation in Switzerland.

## Technology
Values refer to a commonly used technology for this product.

## Time period
Year when data for the inventory were communicated

## Reference product
- stone meal: 1 kg; By-product classification allocatable product; CPC 34649: Other mineral or chemical fertilizers containing at least two nutrients (nitrogen, phosphate, potash), n.e.c.
  production volume 3.96633 kg
  properties: carbon allocation 0.06 kg, carbon content 0.06, carbon content, fossil 0.06, carbon content, non-fossil 0, dry mass 1 kg, price 0.211753 EUR2005, water content 0, water in wet mass 0 kg, wet mass 1 kg

## Inputs from technosphere
- chemical factory, organics: 4e-10 unit; lognormal variance with pedigree 0.1346, pedigree (3,3,5,5,1)
- electricity, low voltage: 0.00019655, 0.000962923, 0.000141528, 4.80617e-5, 0.000280476, 0.000667458, 0.00269426, 8.74021e-6 kWh (8 suppliers, which the file names only by identifier); sum of these 0.005 kWh; lognormal variance with pedigree 0.0146, pedigree (3,3,5,5,1)

## Sampling procedure
Data retrieved from a Swiss manufacturer.

## Extrapolations
none This dataset has been copied from an original dataset covering the geography CH. The uncertainty has been adjusted accordingly.

## Review by Maggie Osses 2003-07-25
Passed.
