# regenerative thermal oxidation of nitrous oxide

Dataset: EcoSpold 2, unit process
Geography: RoW
Time period: 2022-01-01 to 2022-12-31
Technology level: current
Classification: ISIC rev.4 ecoinvent: 3510:Electric power generation, transmission and distribution
Synonyms: RTO
Scenario: Business-as-Usual
System model: Allocation, cut-off by classification
Generated by: [System]
Database: ecoinvent
isCopyrightProtected: true
accessRestrictedTo: 1

## General comment
In the regenerative thermal oxidation, nitrous oxide is broken down into N2 and O2.
References:
Lanxess (2021): LANXESS inaugurates nitrous oxide reduction plant in Antwerp, available here: https://lanxess.com/en/Media/Press-Releases/2021/02/LANXESS-inaugurates-nitrous-oxide-reduction-plant-in-Antwerp, last accessed 28-07-2022.
Chemical Engeneering (2021): A two-step process reduces nitrous oxide emissions, avaiable here: https://www.chemengonline.com/nitrous-oxide-emissions/, last accessed 28-07-2022.

## Included activities start
Denitrification process starting with the operation of a plant.

## Included activities end
This activity ends with 1 kg retained N2O resulting from the denitrification process.

## Technology
In the regenerative thermal oxidation, 1 kg of nitrous oxide is broken down into N2 and O2 at 1000°C. The treatment has a 95% yield for the N2O abatement.

## Reference product
- N2O retained, by regenerative thermal oxidation: 1 kg; By-product classification allocatable product; CPC 35499: Other chemical products n.e.c.
  production volume 0.804 kg
  properties: carbon allocation 0 kg, carbon content 0, carbon content, fossil 0, carbon content, non-fossil 0, dry mass 0 kg, price 0.051782 EUR2005, water content 0, water in wet mass 0 kg, wet mass 0 kg

## Inputs from technosphere
- electricity, medium voltage: 0.0283756, 0.0142407, 0.260349, 0.00431167, 0.000845026, 0.0909382 kWh (6 suppliers, which the file names only by identifier); sum of these 0.39906 kWh; lognormal variance with pedigree 0.2106, pedigree (5,5,5,5,5)
- heat, district or industrial, natural gas: 1.10226, 0.0181129 MJ (2 suppliers, which the file names only by identifier); sum of these 1.12037 MJ; lognormal variance with pedigree 0.2106, pedigree (5,5,5,5,5)
  properties: heating value, net 1 MJ
