# polyethylene production, linear low density, granulate

Dataset: EcoSpold 2, unit process
Geography: RoW
Time period: 2011-01-01 to 2022-12-31
Technology level: current
Classification: ISIC rev.4 ecoinvent: 2013:Manufacture of plastics and synthetic rubber in primary forms
Synonyms: LLDPE
Scenario: Business-as-Usual
System model: Allocation, cut-off by classification
Generated by: Thomas Fröhlich
Published in: PlasticsEurope 2016
Database: ecoinvent
isCopyrightProtected: true
accessRestrictedTo: 1

## General comment
The dataset represents the production mix of commercial LLDPE production technologies: gas phase polymerisation and soulution polimerisation using Ziegler-Natta and Metallocene catalysts
LLDPE is either produced in the gas phase process in a fluidised bed reactor or in the solution process. Depending of the kind of co-monomer chosen, the kind of used technology has to be adapted. If 1-butene is used as co-monomer, usually the gas phase process is chosen, for 1-octene as co-monomer, the solution process is preferable. For a polymerisation process with 1-hexene as co-monomer, however, both technologies can be applied. As catalysts, usually Ziegler-Natta or metallocene-type catalysts are applied.
In the gas phase processes a fluidised bed of polymer particles and catalyst is maintained by a steady gaseous monomer feed from the bottom of the reactor. Polymer powder is continuously extracted at the bottom of the fluidised bed reactor. Unreacted monomer gas from the top is compressed and recycled to the reactor inlet. Catalyst, and co-catalyst if necessary, is also continuously fed to the reactor. Typically Ziegler-Natta catalysts are used for gas phase polymerisation where the catalyst is supported on inert silica particles so that the reaction takes place at the catalyst surface.
For solution polymerisation, the hydrocarbon solvent (C9-C6) is kept at high temperature (>130 °C) to ensure that the formed polymer stays dissolved after production. In a subsequent step, the solvent is evaporated and recycled, and the liquid polymer can directly be sent to the extruder.
After the reaction phase, most of the residual (unreacted) monomers (which are mostly present as gases) are separated from the polymer and are either recycled back into the process or flared of. Depending on the purity of the separated monomers, the gas can either be fed directly back into the production line or the monomers are returned to a purification unit. To limit the accumulation of impurities in the process, usually a small side-stream (purge) of the unreacted gas is sent back to the cracker or to a dedicated purification unit. After polymerisation, the polymer is usually fed di-rectly into a hot melt extruder, where additives can be added to the melted polymer if required. The polymer is then pelletised in an underwater pelletiser. The pelletised product is dried, blended where required and degassed.

## Included activities start
Acitivity starts with monomers and comonomers entering the polymerisation plant. Energy supply is included in terms of heat production inside the battery limits of the plant. Steam and electricity supply is outside the activity.

## Included activities end
Activity ends with polymer granulate leaving the factory.

## Allocation
The polyolefin production itself is regarded as a single-output process since only one polymer type is produced by one installation. All other products of this installation, e.g. monomers being recycled to the cracker or distillation, or hydrocarbons being used thermally, are treated as internal flows replacing the respective input materials (i.e. monomers or energy carriers). Hence, no allocation is needed for the polyolefin production process.

## Geography
Extrapolated from dataset with data for EU27 including Norway and Switzerland. The production volume and uncertainty have been adjusted accordingly.

## Time period
Data was collected for the year 2011, processed in 2013 and published in 2014

## Reference product
- polyethylene, linear low density, granulate: 1 kg; By-product classification allocatable product; CPC 34710: Polymers of ethylene, in primary forms
  production volume 1.52842e10 kg
  properties: carbon allocation 0.857143 kg, carbon content 0.857143, carbon content, fossil 0.857143, carbon content, non-fossil 0, dry mass 1 kg, heating value, net 42.47 MJ, price 1.29 EUR2005, water content 0, water in wet mass 0 kg, wet mass 1 kg

## Inputs from technosphere
- chemical factory, organics: 4e-10 unit; lognormal variance with pedigree 0.3098, pedigree (2,3,3,4,3)
- chemical, inorganic: 0.0030926 kg; lognormal variance with pedigree 0.0035, pedigree (3,3,5,5,3)
  properties: carbon content, fossil 0.003, dry mass 1 kg, wet mass 1 kg
- chemical, organic: 0.0859425 kg; lognormal variance with pedigree 0.0035, pedigree (3,3,5,5,3)
  properties: carbon content, fossil 0.628, dry mass 1 kg, heating value, net 19.03 MJ, wet mass 1 kg
- compressed air, 600 kPa gauge: 0.0258615 m3; lognormal variance with pedigree 0.0035, pedigree (3,3,5,5,3)
- electricity, medium voltage: 0.0251274, 0.0126105, 0.230546, 0.0038181, 0.000748293, 0.0805281 kWh (6 suppliers, which the file names only by identifier); sum of these 0.353378 kWh; lognormal variance with pedigree 0.0035, pedigree (3,3,5,5,3)
- ethylene: 0.921369, 0.0147831 kg (2 suppliers, which the file names only by identifier); sum of these 0.936152 kg; lognormal variance with pedigree 0.0035, pedigree (3,3,5,5,3)
  properties: carbon content, fossil 0.857143, dry mass 1 kg, heating value, net 43.22 MJ, wet mass 1 kg
- hazardous waste, for incineration: -0.000253616 kg; lognormal variance with pedigree 0.0049, pedigree (3,3,2,5,3)
  properties: carbon content, fossil 0.554667, dry mass 0.75 kg, heating value, net 17 MJ, water content 0.333333, wet mass 1 kg
- heat, from steam, in chemical industry: 0.398619 MJ; lognormal variance with pedigree 0.0035, pedigree (3,3,5,5,3)
  properties: heating value, net 1 MJ
- hydrogen, liquid: 0.0002264 kg; lognormal variance with pedigree 0.0035, pedigree (3,3,5,5,3)
  properties: dry mass 1 kg, heating value, net 120.21 MJ, wet mass 1 kg
- natural gas, high pressure: 2.25216e-5, 5.32678e-5, 1.02192e-6, 0.000129134, 0.000266192, 7.64826e-5, 5.48703e-5, 0.000126786, 0.000317259, 0.00310406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 m3 (24 suppliers, which the file names only by identifier); sum of these 0.00928203 m3; lognormal variance with pedigree 0.0035, pedigree (3,3,5,5,3)
  properties: carbon content, fossil 0.695187, dry mass 1 kg, heating value, net 36 MJ, wet mass 1 kg
- nitrogen, liquid: 0.0741013 kg; lognormal variance with pedigree 0.0035, pedigree (3,3,5,5,3)
  properties: dry mass 1 kg, wet mass 1 kg
- solvent, organic: 0.0101688 kg; lognormal variance with pedigree 0.0035, pedigree (3,3,5,5,3)
  properties: carbon content, fossil 0.63072, dry mass 1 kg, heating value, net 19.11 MJ, wet mass 1 kg
- spent solvent mixture: -0.000307539 kg; lognormal variance with pedigree 0.0049, pedigree (3,3,2,5,3)
  properties: carbon content, fossil 0.571257, dry mass 0.835 kg, heating value, net 21.7 MJ, water content 0.197605, wet mass 1 kg
- titanium tetrachloride: 0.000234426 kg; lognormal variance with pedigree 0.0035, pedigree (3,3,5,5,3)
  properties: dry mass 1 kg, wet mass 1 kg
- waste plastic, mixture: -2.83089e-6, -2.68819e-6, -1.14365e-6, -5.18346e-7, -0.000102578, -0.000718101, -6.85385e-6 kg (7 suppliers, which the file names only by identifier); sum of these -0.000834714 kg; lognormal variance with pedigree 0.0049, pedigree (3,3,2,5,3)
  properties: carbon content, fossil 0.747344, dry mass 0.847 kg, heating value, net 30.79 MJ, water content 0.180638, wet mass 1 kg
- wastewater, average: -2.17654e-5, -7.74932e-8 m3 (2 suppliers, which the file names only by identifier); sum of these -2.18429e-5 m3; lognormal variance with pedigree 0.0434, pedigree (3,3,2,5,3)
  properties: carbon content, non-fossil 0.194039, dry mass 0.346837 kg, water content 2882.2, wet mass 1000 kg
- wastewater, unpolluted: -0.0677939 m3; lognormal variance with pedigree 0.0049, pedigree (3,3,2,5,3)
  properties: carbon content, fossil 0.00178991, carbon content, non-fossil 0.00178991, dry mass 0.337476 kg, water content 2962.17, wet mass 1000 kg

## Inputs from nature
- Water, cooling, unspecified natural origin [natural resource, in water]: 0.0887132 m3; lognormal variance with pedigree 0.0035, pedigree (3,3,5,5,3)
- Water, unspecified natural origin [natural resource, in water]: 0.000434869 m3; lognormal variance with pedigree 0.0035, pedigree (3,3,5,5,3)

## Emissions to nature
- Carbon dioxide, fossil [air, unspecified]: 0.082571 kg; lognormal variance with pedigree 0.0035, pedigree (3,3,5,5,3)
- Carbon monoxide, fossil [air, unspecified]: 8.64132e-5 kg; lognormal variance with pedigree 0.6534, pedigree (3,3,5,5,3)
- Dinitrogen monoxide [air, unspecified]: 6.66331e-6 kg; lognormal variance with pedigree 0.0429, pedigree (3,3,5,5,3)
- Ethylene [air, unspecified]: 6.08551e-5 kg; lognormal variance with pedigree 0.1234, pedigree (3,3,5,5,3)
- Hydrogen [air, unspecified]: 9.57478e-9 kg; lognormal variance with pedigree 0.0434, pedigree (3,3,5,5,3)
- Methane, fossil [air, unspecified]: 7.91982e-8 kg; lognormal variance with pedigree 0.0434, pedigree (3,3,5,5,3)
- NMVOC, non-methane volatile organic compounds [air, unspecified]: 0.000138773 kg; lognormal variance with pedigree 0.0429, pedigree (3,3,5,5,3)
- Nitrogen oxides [air, unspecified]: 4.02759e-5 kg; lognormal variance with pedigree 0.0429, pedigree (3,3,5,5,3)
- Particulate Matter, > 10 um [air, unspecified]: 2.26422e-6 kg; lognormal variance with pedigree 0.0434, pedigree (3,3,5,5,3)
- Particulate Matter, > 2.5 um and < 10um [air, unspecified]: 2.23331e-7 kg; lognormal variance with pedigree 0.1234, pedigree (3,3,5,5,3)
- Propene [air, unspecified]: 6.91339e-7 kg; lognormal variance with pedigree 0.1234, pedigree (3,3,5,5,3)
- Sulfur dioxide [air, unspecified]: 1.33921e-7 kg; lognormal variance with pedigree 0.004, pedigree (3,3,5,5,3)
- Sulfur hexafluoride [air, unspecified]: 1.423e-9 kg; lognormal variance with pedigree 0.0434, pedigree (3,3,5,5,3)
- Water [air, unspecified]: 0.0213323 m3; lognormal variance with pedigree 0.0109, pedigree (3,3,5,5,3)
- AOX, Adsorbable Organic Halogen [water, unspecified]: 4.54159e-8 kg; lognormal variance with pedigree 0.0429, pedigree (3,3,5,5,3)
- Ammonium [water, unspecified]: 1.49289e-7 kg; lognormal variance with pedigree 0.0434, pedigree (3,3,5,5,3)
- Nitrogen, organic bound [water, unspecified]: 3.08645e-6 kg; lognormal variance with pedigree 0.0434, pedigree (3,3,5,5,3)
- Phosphorus [water, unspecified]: 6.21095e-7 kg; lognormal variance with pedigree 0.0434, pedigree (3,3,5,5,3)
- Suspended solids, unspecified [water, unspecified]: 1.10011e-6 kg; lognormal variance with pedigree 0.0429, pedigree (3,3,5,5,3)
- Zinc II [water, unspecified]: 6.25583e-8 kg; lognormal variance with pedigree 0.6534, pedigree (3,3,5,5,3)

## Sampling procedure
Extrapolated from European data. Questionnaires sent out to all production units in Europe operated by PlasticEurope member companies.

## Extrapolations
This dataset has been created as a copy of the original dataset covering the geography RER, i.e., Europe. Annual production volume(s) and uncertainty have been adjusted accordingly. It is important to note that original RER dataset represents the average production mix, composed of several different processes/technologies, in Europe in the year of reference. It might not reflect the actual global production mix and should hence only be used as a proxy.
