# NMC811 oxide production, for Li-ion battery

Dataset: EcoSpold 2, unit process
Geography: RoW
Time period: 2018-01-01 to 2022-12-31
Technology level: current
Classification: ISIC rev.4 ecoinvent: 2011:Manufacture of basic chemicals
Synonyms: nickel-manganese-cobalt 811 oxide; nickel manganese cobalt 811 oxide
Scenario: Business-as-Usual
System model: Allocation, cut-off by classification
Generated by: Eleonora Crenna
Published in: Dai, Q. 2018
Database: ecoinvent
isCopyrightProtected: true
accessRestrictedTo: 1

## General comment
This dataset represents the production of 1 kg nickel manganese cobalt (NMC) oxide, used as active material in the production NMC811 cathodes in Li-ion batteries. This dataset is a copy of the corresponding regional dataset. Production volume was adjusted.

## Included activities start
The activity starts when NMC811 hydroxide and other chemicals enter the process at the factory.

## Included activities end
The activity ends with the production at factory gate of NMC811 oxide via calcination process.

## Geography
This dataset is considered representative of the global situation. It is based on data from the geography China, which is the leader country of Li-ion battery material production.

## Technology
NMC811 oxide is produced through a multi-step calcination process. NMC811 hydroxide and lithium hydroxide are mixed and heated in the calcination kiln over two or three rounds of mixing and calcination. The resulting material is crushed, sieved and demagnetized to obtain NMC811 oxide. The production process is completely automated and almost all electricity consumption is attributed to the calcination kiln. The facility can achieve an overall material efficiency of approximately100%.
The general reaction is the following:
NMC(OH)2 + 2LiOH --> Li-NMC-O2 + 2H2O.
Reference:
Dai, Q., Kelly, J. C., Dunn, J., & Benavides, P. (2018). Update of Bill-of-Materials and Cathode Materials Production for Lithium-Ion Batteries in the GREET Model. 2018. Argonne National Laboratory.

## Time period
The time period is from 2018 (year of the publication of data) and 2020 (year of the dataset)

## Reference product
- NMC811 oxide: 1 kg; By-product classification allocatable product; CPC 34220: Zinc oxide; zinc peroxide; chromium oxides and hydroxides; manganese oxides; iron oxides and hydroxides; earth[…]
  production volume 1.4605e7 kg
  properties: carbon allocation 0 kg, carbon content 0, carbon content, fossil 0, carbon content, non-fossil 0, dry mass 1 kg, price 23.24 EUR2005, water content 0, water in wet mass 0 kg, wet mass 1 kg

## Inputs from technosphere
- NMC811 hydroxide: 0.949 kg; lognormal variance with pedigree 0.0038, pedigree (2,3,2,5,1)
  properties: dry mass 1 kg, heating value, net 2.62 MJ, wet mass 1 kg
- chemical factory, organics: 7.41e-10 unit; lognormal variance with pedigree 0.3052, pedigree (3,3,2,5,2)
- electricity, medium voltage: 0.00635747, 0.002767, 0.369674, 0.572854, 0.0060184, 0.00921203, 0.423358, 0.00351332, 1.38435, 0.0976442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 kWh (46 suppliers, which the file names only by identifier); sum of these 7.26 kWh; lognormal variance with pedigree 0.0038, pedigree (2,3,2,5,1)
- lithium hydroxide: 0.246 kg; lognormal variance with pedigree 0.0092, pedigree (2,3,2,5,1)
  properties: dry mass 1 kg, heating value, net 5.06 MJ, wet mass 1 kg

## Emissions to nature
- Water [air, non-urban air or from high stacks]: 0.000195623 m3; lognormal variance with pedigree 0.0846, pedigree (3,3,2,5,4)

## Sampling procedure
The data about the production process of NMC811 oxide are retrieved from the literature (see published source field). The value of water emissions is calculated to obtain mass balance; the value of infrastructure is calculated as representative of the production site.

## Extrapolations
The dataset is extrapolated from CN data; the uncertainty has been adjusted accordingly.
