# operation, computer, laptop, standby/sleep mode

Dataset: EcoSpold 2, unit process
Geography: RoW
Time period: 2001-01-01 to 2022-12-31
Technology level: current
Classification: EcoSpold01Categories: electronics/services
Classification: ISIC rev.4 ecoinvent: 8219:Photocopying, document preparation and other specialized office support act
Synonyms: Notebook; Lifebook
Tags: Operation; ConvertedDataset
Scenario: Business-as-Usual
System model: Allocation, cut-off by classification
Generated by: Martin Lehmann
Published in: Hischier R. 2007
Database: ecoinvent
isCopyrightProtected: false
accessRestrictedTo: 1

## General comment
The laptop use in the standby/sleep mode includes the share of the laptop computer production, the energy consumption (use-phase) for the laptop (incl. monitor) and the rail and road transport from factory to user. Energy consumption of laptop computers (use-phase) vary a lot depending on the device looked at. Min.-Max. values are listed; the mean value is calculated via the most likely value according to the reference data. Due to relatively vague literature data for laptop computer life span, assumptions had to be made.
[This dataset was already contained in the ecoinvent database version 2. It was not individually updated during the transfer to ecoinvent version 3. Life Cycle Impact Assessment results may still have changed, as they are affected by changes in the supply chain, i.e. in other datasets. This dataset was generated following the ecoinvent quality guidelines for version 2. It may have been subject to central changes described in the ecoinvent version 3 change report (http://www.ecoinvent.org/database/ecoinvent-version-3/reports-of-changes/), and the results of the central updates were reviewed extensively. The changes added e.g. consistent water flows and other information throughout the database. The documentation of this dataset can be found in the ecoinvent reports of version 2, which are still available via the ecoinvent website. The change report linked above covers all central changes that were made during the conversion process.]

## Included activities end
Describes the use of a laptop computer in the standby/sleep mode. Calculated per 1 hour of laptop use. Laptop computer life span assumed to be 4 years. Standby/sleep mode 2 hours a day (office use), 240 days a year. UCTE production mix applied for electricity consumption (low voltage).

## Geography
The data is based on information by international computer manufacturers and literature (standby/sleep mode consumption).

## Technology
No technology involved, except for the production of the laptop computer, which is described in another dataset.

## Reference product
- operation, computer, laptop, standby/sleep mode: 1 hour; By-product classification allocatable product; CPC 85: Support services
  production volume 2.65986 hour
  properties: carbon allocation 0 kg, carbon content 0, price 0.0249715 EUR2005

## Inputs from technosphere
- computer, laptop: 2.8539e-5 unit; lognormal variance with pedigree 0.0146, pedigree (3,3,5,5,1)
  properties: carbon content, fossil 0.257799, carbon content, non-fossil 1.2662e-5, dry mass 3.15 kg, wet mass 3.15 kg
- electricity, low voltage: 0.000833602, 0.000138171, 4.69215e-5, 0.000273822, 0.00263035, 8.53287e-6, 6.86017e-5 kWh (7 suppliers, which the file names only by identifier); sum of these 0.004 kWh; lognormal variance with pedigree 0.0034, pedigree (2,3,5,5,1)

## Sampling procedure
Manufacturers, literature and own assumptions.

## Extrapolations
see Geography and Technology This dataset has been copied from an original dataset covering the geography Europe without Switzerland. The uncertainty has been adjusted accordingly.
