# melamine production

Dataset: EcoSpold 2, unit process
Geography: RoW
Time period: 2000-01-01 to 2022-12-31
Technology level: current
Classification: ISIC rev.4 ecoinvent: 2011:Manufacture of basic chemicals
Synonyms: Cyanurotriamine; Cyanurotriamide; Cyanuramide; Isomelamine; 1,3,5-Triazine-2,4,6-triamine
Scenario: Business-as-Usual
System model: Allocation, cut-off by classification
Generated by: Roland Hischier
Published in: Althaus H.-J. 2007
Database: ecoinvent
isCopyrightProtected: true
accessRestrictedTo: 1

## General comment
This dataset represents the production of 1 kg of solid melamine. At room temperature, melamine is a fine white powered crystal. Most melamine is used for the reaction with formaldehyde for the production of resins used in laminating and adhesive applications. Among these applications, one of the most important ones is the use of melamine for the upper sheet e.g. of tabletops. A second important use of melamine is its function as amino cross-linker in heat-cured systems – e.g. in the automotive industry. Furthermore, this substance has also its applications in other fields like wet-strengh resins for paper industry, ion-exchange resins, plastic moulding compounds or fire retardants in PUR foam.
Almost 100% of melamine is produced out of urea. Different production techniques can be distinguished. All of them are either high-pressure reactions without any catalysts or catalytic reactions at low pressure. Due to lack of data about the different methods, for this dataset a 50:50 mix of the BASF process (as representative for the low pressure reactions) and of the Montedison process (example of high pressure process) is used. This dataset is based on stoichiometric calculations and estimations based on data from a large chemical factory (Gendorf 2016).
References:
Althaus H.-J., Chudacoff M., Hischier R., Jungbluth N., Osses M. and Primas A. (2007) Life Cycle Inventories of Chemicals. ecoinvent report No. 8, v2.0. EMPA Dübendorf, Swiss Centre for Life Cycle Inventories, Dübendorf, CH.
Gendorf (2016) Umwelterklärung 2015, Werk Gendorf Industriepark, www.gendorf.de.

## Included activities start
From the reception of urea at the factory gate.

## Included activities end
This activity ends with 1 kg of melamine at the factory gate. The dataset includes the input materials, auxilliaries, energy uses, infrastructure and emissions.

## Geography
The data used has no specific geographical origin as it is based on stoechiometric calculations and estimations. It is assumed to be representative of the production processes in this geography. Some values are based on data from a large chemical factory located in Germany. These are assumed to be valid for this geography.

## Technology
Almost 100% of melamine is produced out of urea. Different production techniques can be distinguished. All of them are either high-pressure reactions without any catalysts or catalytic reactions at low pressure. Within each of the reactions, the three steps of synthesis, melamine recovery and purification as well as off-gas treatment can be distinguished. Due to lack of data about the different methods, for this dataset a 50:50 mix of the BASF process (as representative for the low pressure reactions) and of the Montedison process (example of high pressure process) is used.
In the first case (BASF process), alumina is used as a catalyst. The reaction temperature is about 400°C and for the fluidization, an ammonia-carbon dioxide mixture is added. The off-gas treatment has several steps that remove melamine and unreacted urea. The remaining off-gas is partly used as the above mentioned fluidization gas, partly as quentching gas in the crystallizer unit.
In case of the Montedison process, the operation temperature is about 370°C and the pressure is around 7 MPa. Besides urea, ammonia is also feed into the reactor. In the following quencher, this mixture is treated with an aqueous solution of ammonia and carbon dioxide resulting in a precipitation of melamine. The remaining mixture of ammonia and carbon dioxide is recycled either in a urea or in other fertilizer production sites.
In the beginning of the 90s, the worldwide production capacity of melamine was in the order of 550 kt. Thereof, 230 kt are in Europe, 175 kt in Middle and Far East and only 97 kt in the United States.
6 H2N-CO-NH2 -> C3N3(NH2)3 + 6 NH3 + 3 CO2
References:
Crews G. M. and Ripperger W. (2001) Melamine and Guanamines. In: Ullmann's Encyclopedia of Industrial Chemistry, Sixth Edition, 2003 Electronic Release (ed. Häussinger P., Leitgeb P. and Schmücker B.), 6 th Electronic Release Edi-tion. Wiley InterScience, New York, Online-Version under: http://www.mrw.interscience.wiley.com/ueic/ull_search_fs.html.
SRI Consulting (2006) Chemicals Economics Handbook broschure. SRI Consult-ing, Menlo Park (CA), as pdf-File under: www.sriconsulting.com/SRIC/ Pub-lic/NewsEventsArt/CEHbrochure.pdf

## Time period
Date of published literature. Some values are based on data published by the Gendorf factory that were collected between 2011 and 2015. The time period has been adjusted accordingly. For more details, see the comments of the exchanges.

## Reference product
- melamine: 1 kg; By-product classification allocatable product; CPC 35230: Lactones n.e.c., heterocyclic compounds with nitrogen hetero-atom(s) only, containing an unfused pyrazole ring[…]
  production volume 4.956e8 kg
  properties: carbon allocation 0.285714 kg, carbon content 0.285714, carbon content, fossil 0.285714, carbon content, non-fossil 0, dry mass 1 kg, heating value, net 14.42 MJ, price 0.88 EUR2005, water content 0, water in wet mass 0 kg, wet mass 1 kg

## Inputs from technosphere
- chemical factory, organics: 4e-10 unit; lognormal variance with pedigree 0.3098, pedigree (2,3,2,4,3)
- electricity, medium voltage: 0.0295802, 0.0148452, 0.271401, 0.0044947, 0.000880897, 0.0947985 kWh (6 suppliers, which the file names only by identifier); sum of these 0.416 kWh; lognormal variance with pedigree 0.0104, pedigree (2,3,2,4,3)
- heat, district or industrial, natural gas: 2.11524, 0.0347588 MJ (2 suppliers, which the file names only by identifier); sum of these 2.15 MJ; lognormal variance with pedigree 0.0104, pedigree (2,3,2,4,3)
  properties: heating value, net 1 MJ
- heat, from steam, in chemical industry: 0.2 MJ; lognormal variance with pedigree 0.0104, pedigree (2,3,2,4,3)
  properties: heating value, net 1 MJ
- nitrogen, liquid: 0.019 kg; lognormal variance with pedigree 0.0104, pedigree (2,3,2,4,3)
  properties: dry mass 1 kg, wet mass 1 kg
- tap water: 0.00203022, 0.000150233, 0.0232328, 0.000404717, 4.8717e-5, 8.05128e-5, 5.28156e-5 kg (7 suppliers, which the file names only by identifier); sum of these 0.026 kg; lognormal variance with pedigree 0.0104, pedigree (2,3,2,4,3)
  properties: carbon content, fossil 0.00178991, dry mass 0.000337476 kg, water content 2962.17, wet mass 1 kg
- urea: 1.50469, 0.1903, 1.28489 kg (3 suppliers, which the file names only by identifier); sum of these 2.97988 kg; lognormal variance with pedigree 0.1786, pedigree (4,5,5,5,5)
  properties: carbon content, fossil 0.2, dry mass 1 kg, wet mass 1 kg
- wastewater, average: -2.69042e-6, -9.57892e-9 m3 (2 suppliers, which the file names only by identifier); sum of these -2.7e-6 m3; lognormal variance with pedigree 0.0104, pedigree (2,3,1,4,3)
  properties: carbon content, non-fossil 0.194039, dry mass 0.346837 kg, water content 2882.2, wet mass 1000 kg

## Inputs from nature
- Water, cooling, unspecified natural origin [natural resource, in water]: 0.0164 m3; lognormal variance with pedigree 0.0104, pedigree (2,3,2,4,3)
- Water, river [natural resource, in water]: 0.00086 m3; lognormal variance with pedigree 0.0104, pedigree (2,3,2,4,3)
- Water, well, in ground [natural resource, in water]: 0.00083 m3; lognormal variance with pedigree 0.0104, pedigree (2,3,2,4,3)

## Emissions to nature
- Ammonia [air, urban air close to ground]: 0.0017 kg; lognormal variance with pedigree 0.33, pedigree (5,5,5,5,5)
- Isocyanic acid [air, urban air close to ground]: 0.00431 kg; lognormal variance with pedigree 0.33, pedigree (5,5,5,5,5)
- Nitrogen [air, unspecified]: 0.019 kg; lognormal variance with pedigree 0.0104, pedigree (2,3,2,4,3)
- Water [air, unspecified]: 0.0014 m3; lognormal variance with pedigree 0.0104, pedigree (2,3,2,4,3)
- Water [water, unspecified]: 0.0167 m3; lognormal variance with pedigree 0.0104, pedigree (2,3,2,4,3)

## Sampling procedure
The process data is estimated based on literature and stoechiometric calculations. Process emissions are based on estimations only. Some values are calculated based on data from a large chemical factory located in Germany. For more details, see the comments of the exchanges.

## Extrapolations
This dataset has been copied from an original dataset covering the geography RER. The uncertainty has been adjusted accordingly.

## Review by Gregor Wernet 2017-08-04
This dataset was additionally reviewed in a separate review process by Eric Johnson of Atlantic Consulting as well as Emilia Moreno Ruiz and Gregor Wernet of ecoinvent.
