# tetrachloroethylene production

Dataset: EcoSpold 2, unit process
Geography: RoW
Time period: 1997-01-01 to 2022-12-31
Technology level: current
Classification: ISIC rev.4 ecoinvent: 2011:Manufacture of basic chemicals
Classification: EcoSpold01Categories: chemicals/organics
Synonyms: tetrachloroethene; PER; perchloroethylene; ethylene tetrachloride; carbon dichloride; Perc
Tags: ConvertedDataset
Scenario: Business-as-Usual
System model: Allocation, cut-off by classification
Share of production covered: 76 %
Generated by: Alex Primas
Published in: Althaus H.-J. 2007
Database: ecoinvent
isCopyrightProtected: true
accessRestrictedTo: 1

## General comment
The data source for this process is a system inventory from Boustead. Due to the cumulated form of this data only the ressources and emissions included in the data source were considered. No land occupation and land use is included in this dataset. Further it was not possible to implement an uncertainity assessment with this data.
[This dataset was already contained in the ecoinvent database version 2. It was not individually updated during the transfer to ecoinvent version 3. Life Cycle Impact Assessment results may still have changed, as they are affected by changes in the supply chain, i.e. in other datasets. This dataset was generated following the ecoinvent quality guidelines for version 2. It may have been subject to central changes described in the ecoinvent version 3 change report (http://www.ecoinvent.org/database/ecoinvent-version-3/reports-of-changes/), and the results of the central updates were reviewed extensively. The changes added e.g. consistent water flows and other information throughout the database. The documentation of this dataset can be found in the ecoinvent reports of version 2, which are still available via the ecoinvent website. The change report linked above covers all central changes that were made during the conversion process.]

## Included activities end
Raw materials, processing energy, emissions to air and water from process, energy services and transports, infrastructure only partly included, no infrastructure of main process included, no land use data included.

## Geography
Data from various plants within Europe.

## Technology
Data refers to actual technology used in the companies included. This leads in total to an average value including all important production routes for this chemical

## Time period
Time of literature publication. Measurements took place before this period.

## Parameters
- fraction, cooling water, cooling pond system, to air: 0.032 dimensionless; name fraction_CW_CP_to_air; lognormal variance with pedigree 0.0413, pedigree (2,3,1,3,1)
  Calculated based on literature value (Scown, C.D., 2011, Water Footprint of U.S. Transportation Fuels and supplying information of the article) (Vionnet, S., Quantis Water Database - Technical Report, 2012).
- fraction, cooling water, once-through system, to air: 0.004 dimensionless; name fraction_CW_OT_to_air; lognormal variance with pedigree 0.0413, pedigree (2,3,1,3,1)
  (same comment as for fraction, cooling water, cooling pond system, to air)
- fraction, cooling water, recirculating system, to air: 0.771 dimensionless; name fraction_CW_R_to_air; lognormal variance with pedigree 0.0413, pedigree (2,3,1,3,1)
  (same comment as for fraction, cooling water, cooling pond system, to air)
- fraction, cooling water, to air: 0.3875 dimensionless; name fraction_CW_to_air; = (0.5*fraction_CW_OT_to_air)+(0.5*fraction_CW_R_to_air); lognormal variance with pedigree 0.092025, pedigree (4,4,3,2,4)
  Calculated value based on literature value (see comments of the other parametres present in this dataset) and expert opinion. In the case when no industry/literature data are available about the type of cooling or directly fraction, cooling water, to air specific for the process a default assumption is applied. It is assumed that the once-through cooling system is used in 50% of all cases and recirculating system is used in another 50% of all cases.
- fraction, process water, to air: 0.205 dimensionless; lognormal variance with pedigree 0.092025, pedigree (4,4,3,2,4)

## Reference product
- tetrachloroethylene: 1 kg; By-product classification allocatable product; CPC 34110: Hydrocarbons and their halogenated, sulphonated, nitrated or nitrosated derivatives
  production volume 3.41775 kg
  properties: carbon allocation 0.146341 kg, carbon content 0.146341, carbon content, fossil 0.146341, carbon content, non-fossil 0, dry mass 1 kg, heating value, net 4.39 MJ, price 0.704 EUR2005, water content 0, water in wet mass 0 kg, wet mass 1 kg

## Inputs from technosphere
- average incineration residue: -0.0209 kg
  properties: carbon content, fossil 0.0325466, carbon content, non-fossil 0.0511208, dry mass 1 kg, wet mass 1 kg
- decommissioned chemical production facilities: -3e-5 kg
  properties: carbon content, fossil 0.0169382, carbon content, non-fossil 5.78006e-6, dry mass 1 kg, wet mass 1 kg
- hazardous waste, for incineration: -0.0039 kg
  properties: carbon content, fossil 0.554667, dry mass 0.75 kg, heating value, net 17 MJ, water content 0.333333, wet mass 1 kg
- municipal solid waste: -1.42242e-6, -8.42029e-7, -1.1947e-7, -2.48675e-5, -7.68385e-6, -1.05405e-6, -3.96958e-6, -4.17698e-6, -1.09012e-5, -4.26369e-6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 kg (33 suppliers, which the file names only by identifier); sum of these -0.003127 kg
  properties: carbon content, fossil 0.171549, carbon content, non-fossil 0.261655, dry mass 0.771 kg, heating value, net 11.74 MJ, water content 0.297017, wet mass 1 kg
- waste plastic, mixture: -3.75288e-9, -6.34077e-9, -4.37548e-9, -2.97797e-9, -3.57629e-9, -6.02115e-9, -4.53546e-9, -2.6182e-8, -1.17254e-10, -6.59469e-10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 kg (36 suppliers, which the file names only by identifier); sum of these -2e-6 kg
  properties: carbon content, fossil 0.747344, dry mass 0.847 kg, heating value, net 30.79 MJ, water content 0.180638, wet mass 1 kg
- waste wood, untreated: -1.41973e-10, -3.86068e-10, -5.35218e-9, -1.04192e-10, -1.11662e-10, -6.0532e-10, -3.13714e-8, -4.60098e-10, -6.77456e-9, -1.26647e-10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 kg (36 suppliers, which the file names only by identifier); sum of these -5e-7 kg
  properties: carbon content, non-fossil 0.48632, dry mass 0.8 kg, heating value, net 13.99 MJ, water content 0.25, wet mass 1 kg

## Inputs from nature
- Aluminium [natural resource, in ground]: 7.42e-5 kg
- Anhydrite [natural resource, in ground]: 2e-6 kg
- Calcite [natural resource, in ground]: 0.0078 kg
- Clay, bentonite [natural resource, in ground]: 2e-5 kg
- Clay, unspecified [natural resource, in ground]: 0.0005 kg
- Coal, brown [natural resource, in ground]: 0.11 kg
- Coal, hard, unspecified [natural resource, in ground]: 0.2 kg
- Dolomite [natural resource, in ground]: 5e-6 kg
- Energy, potential (in hydropower reservoir), converted [natural resource, in water]: 0.27 MJ
- Fluorspar [natural resource, in ground]: 2e-6 kg
- Gas, natural [natural resource, in ground]: 0.362 Sm3
- Gravel [natural resource, in ground]: 1e-6 kg
- Iron [natural resource, in ground]: 0.0004 kg
- Oil, crude [natural resource, in ground]: 0.18 kg
- Olivine [natural resource, in ground]: 4e-6 kg
- Sand, unspecified [natural resource, in ground]: 0.072 kg
- Shale [natural resource, in ground]: 6e-6 kg
- Sodium chloride [natural resource, in ground]: 1.2 kg
- Sulfur [natural resource, in ground]: 0.001 kg
- Sylvite [natural resource, in ground]: 3e-6 kg
- Uranium [natural resource, in ground]: 6.65e-6 kg
- Water, cooling, unspecified natural origin [natural resource, in water]: 0.11 m3; lognormal variance with pedigree 1.21, pedigree (5,5,5,5,5)
- Water, river [natural resource, in water]: 4.2e-6 m3; lognormal variance with pedigree 1.21, pedigree (5,5,5,5,5)
- Water, salt, ocean [natural resource, in water]: 3.5e-6 m3; lognormal variance with pedigree 1.21, pedigree (5,5,5,5,5)
- Water, unspecified natural origin [natural resource, in water]: 0.0082 m3; lognormal variance with pedigree 1.21, pedigree (5,5,5,5,5)
- Water, well, in ground [natural resource, in water]: 3e-7 m3; lognormal variance with pedigree 1.21, pedigree (5,5,5,5,5)
- Wood, unspecified, standing [natural resource, biotic]: 3.04e-9 m3

## Emissions to nature
- Aldehydes, unspecified [air, urban air close to ground]: 5e-7 kg
- Ammonia [air, urban air close to ground]: 5e-7 kg
- Carbon dioxide, fossil [air, urban air close to ground]: 2 kg
- Carbon monoxide, fossil [air, urban air close to ground]: 0.0038 kg
- Chlorine [air, urban air close to ground]: 2e-6 kg
- Chloroethylene [air, urban air close to ground]: 0.0028 kg
- Dinitrogen monoxide [air, urban air close to ground]: 5e-7 kg
- Ethane, 1,2-dichloro- [air, urban air close to ground]: 0.0055 kg
- Fluorine [air, urban air close to ground]: 5e-7 kg
- Hydrocarbons, aromatic [air, urban air close to ground]: 2e-6 kg
- Hydrocarbons, chlorinated [air, urban air close to ground]: 0.0024 kg
- Hydrochloric acid [air, urban air close to ground]: 0.00011 kg
- Hydrogen [air, urban air close to ground]: 0.00056 kg
- Hydrogen fluoride [air, urban air close to ground]: 5e-6 kg
- Hydrogen sulfide [air, urban air close to ground]: 5e-7 kg
- Lead II [air, urban air close to ground]: 5e-7 kg
- Mercury II [air, urban air close to ground]: 5e-7 kg
- Methane, dichlorodifluoro-, CFC-12 [air, urban air close to ground]: 0.00015 kg
- Methane, fossil [air, urban air close to ground]: 0.0074 kg
- NMVOC, non-methane volatile organic compounds [air, urban air close to ground]: 0.00188 kg
- Nitrogen oxides [air, urban air close to ground]: 0.0088 kg
- Particulate Matter, < 2.5 um [air, urban air close to ground]: 0.00105 kg
- Particulate Matter, > 10 um [air, urban air close to ground]: 0.00134 kg
- Particulate Matter, > 2.5 um and < 10um [air, urban air close to ground]: 0.00181 kg
- Sulfate [air, urban air close to ground]: 4.9e-7 kg
- Sulfur dioxide [air, urban air close to ground]: 0.0094 kg
- Water [air, unspecified]: 0.0443068 m3; lognormal variance with pedigree 0.0427, pedigree (2,2,5,5,1)
- AOX, Adsorbable Organic Halogen [water, surface water]: 5e-7 kg
- Acidity, unspecified [water, surface water]: 2.9e-5 kg
- Aluminium III [water, surface water]: 5e-7 kg
- Ammonium [water, surface water]: 2e-6 kg
- BOD5, Biological Oxygen Demand [water, surface water]: 4.2e-5 kg
- Bromate [water, surface water]: 5e-7 kg
- COD, Chemical Oxygen Demand [water, surface water]: 0.00048 kg
- Calcium II [water, surface water]: 0.0012 kg
- Carbonate [water, surface water]: 1.8e-5 kg
- Chlorate [water, surface water]: 5e-7 kg
- Chloride [water, surface water]: 0.16 kg
- Chlorinated solvents, unspecified [water, surface water]: 3.4e-5 kg
- Chlorine [water, surface water]: 3.9e-5 kg
- Copper ion [water, surface water]: 5e-7 kg
- Cyanide [water, surface water]: 5e-7 kg
- DOC, Dissolved Organic Carbon [water, surface water]: 0.00015 kg
- Dissolved solids [water, surface water]: 8.2e-5 kg
- Ethane, 1,2-dichloro- [water, surface water]: 1.5e-5 kg
- Fluoride [water, surface water]: 5e-7 kg
- Hydrocarbons, unspecified [water, surface water]: 4.4e-5 kg
- Iron ion [water, surface water]: 0.00019 kg
- Magnesium [water, surface water]: 9e-6 kg
- Mercury II [water, surface water]: 5e-7 kg
- Nickel II [water, surface water]: 5e-7 kg
- Nitrate [water, surface water]: 5e-7 kg
- Nitrogen [water, surface water]: 2e-6 kg
- Oils, unspecified [water, surface water]: 2.8e-5 kg
- Phenol [water, surface water]: 3e-6 kg
- Phosphorus [water, surface water]: 8.8e-7 kg
- Potassium I [water, surface water]: 5e-7 kg
- Sodium I [water, surface water]: 0.097 kg
- Sulfate [water, surface water]: 0.00082 kg
- Sulfide [water, surface water]: 1.6e-5 kg
- Suspended solids, unspecified [water, surface water]: 0.0012 kg
- TOC, Total Organic Carbon [water, surface water]: 0.00015 kg
- Water [water, unspecified]: 0.073897 m3; lognormal variance with pedigree 0.0427, pedigree (2,2,5,5,1)
- Zinc II [water, surface water]: 5e-7 kg

## Sampling procedure
Data represent a large share of the European production. Due to the cummulated data source for the product system invetory there are important parameters as land use or soil emissions missing in this dataset. Considered are only emissions stated in the original source of Boustead.

## Extrapolations
none This dataset has been copied from an original dataset covering the geography WEU. The uncertainty has been adjusted accordingly.

## Review by Roland Hischier 2004-06-07
passed.
