# potato grading

Dataset: EcoSpold 2, unit process
Geography: RoW
Time period: 2002-01-01 to 2022-12-31
Technology level: current
Classification: EcoSpold01Categories: agricultural means of production/work processes
Classification: ISIC rev.4 ecoinvent: 0163:Post-harvest crop activities
Tags: ConvertedDataset
Scenario: Business-as-Usual
System model: Allocation, cut-off by classification
Generated by: Thomas Nemecek
Published in: Nemecek, T. 2007
Database: ecoinvent
isCopyrightProtected: true
accessRestrictedTo: 1

## General comment
Refers to 1 kg of ungraded potatoes
[This dataset was already contained in the ecoinvent database version 2. It was not individually updated during the transfer to ecoinvent version 3. Life Cycle Impact Assessment results may still have changed, as they are affected by changes in the supply chain, i.e. in other datasets. This dataset was generated following the ecoinvent quality guidelines for version 2. It may have been subject to central changes described in the ecoinvent version 3 change report (http://www.ecoinvent.org/database/ecoinvent-version-3/reports-of-changes/), and the results of the central updates were reviewed extensively. The changes added e.g. consistent water flows and other information throughout the database. The documentation of this dataset can be found in the ecoinvent reports of version 2, which are still available via the ecoinvent website. The change report linked above covers all central changes that were made during the conversion process.]

## Included activities end
Demand on machinery, buildings (shed) and electricity for potato grading and weighting.

## Geography
Values refer to the situation in Switzerland.

## Technology
Uses a potato grader and a weigh.

## Time period
Date of the major data sources.

## Reference product
- potato grading: 1 kg; By-product classification allocatable product; CPC 86111: Post-harvest crop services
  production volume 3.94856 kg
  properties: carbon allocation 0 kg, carbon content 0, price 0.000457916 EUR2005

## Inputs from technosphere
- agricultural machinery, unspecified: 0.000216 kg; lognormal variance with pedigree 0.0026, pedigree (1,3,5,5,1)
- electricity, low voltage: 4.04097e-5, 0.000175549, 2.90975e-5, 9.88125e-6, 5.76644e-5, 0.000137226, 0.000553928, 1.79695e-6, 1.44469e-5 kWh (9 suppliers, which the file names only by identifier); sum of these 0.00102 kWh; lognormal variance with pedigree 0.0026, pedigree (1,3,5,5,1)
- shed: 1.09e-6 m2; lognormal variance with pedigree 0.3026, pedigree (1,3,5,5,1)

## Sampling procedure
Data based on the yearly published catalog of machine costs in Switzerland (FAT) and on information from machinery experts of the FAT.

## Extrapolations
none This dataset has been copied from an original dataset covering the geography CH. The uncertainty has been adjusted accordingly.

## Review by Roland Hischier 2003-08-06
Passed.
