# antimony production

Dataset: EcoSpold 2, unit process
Geography: RoW
Time period: 1994-01-01 to 2022-12-31
Technology level: current
Classification: EcoSpold01Categories: metals/extraction
Classification: ISIC rev.4 ecoinvent: 2420:Manufacture of basic precious and other non-ferrous metals
Synonyms: Sb production
Scenario: Business-as-Usual
System model: Allocation, cut-off by classification
Generated by: Hans-Jörg Althaus
Published in: Classen M. 2009
Database: ecoinvent
isCopyrightProtected: true
accessRestrictedTo: 1

## General comment
This activity represents the production of antimony from concentrated stibnite. The dataset approximates metallic antimony and is not to be used when antimony is used as flame retardant (as an oxide) or when it is a substantial part of the system modelled. Antimony is for example used for applications such as a hardener for lead (e.g. in lead-acid batteries, rolled or extruded lead), as a polymerization catalyst in plastic manufacturing, and flame-retardants in plastics. This dataset is a copy of the dataset for China, which produces more than 80% of the global antimony.
Due to lack of information about the production of antimony, this dataset is mainly approximated with data from the smelting process of lead (Classen et al., 2009). This dataset should not be used if its relative importance is high in the product system that is modelled. For more details about the origin of the data, refer to the Sampling Procedure and exchange comments.

## Included activities start
This activity starts with stibnite ore concentrate.

## Included activities end
This activity includes the smelting of the concentrate and ends with antimony.

## Geography
The model represents global Antimony production and is a copy of the dataset for China. China produces more than 80% of the global Antimony.

## Technology
The data represent a mixture of blast furnace, rotary kiln and electrowinning process. It is approximated from lead smelting. See Classen et al. (2009) part XVI

## Reference product
- antimony: 1 kg; By-product classification allocatable product; CPC 41603: Bismuth, antimony, manganese, chromium and articles thereof; including waste and scrap of bismuth or manganese
  production volume 3.39327e7 kg
  properties: antimony content 1, carbon allocation 0 kg, carbon content 0, carbon content, fossil 0, carbon content, non-fossil 0, dry mass 1 kg, price 0.91 EUR2005, water content 0, water in wet mass 0 kg, wet mass 1 kg

## Inputs from technosphere
- antimony slag, desulfurised: -4.24267 kg; lognormal variance with pedigree 0.0045, pedigree (2,3,3,3,2)
  properties: aluminium content 0.0080446, antimony content 0.00693, calcium content 0.215839, dry mass 1 kg, fluorine content 0.0708, iron content 0.0017485, magnesium content 0.00379921, oxygen content 0.5125, silicon content 0.0138365, sodium content 0.00304161, sulfur content 0.162202, wet mass 1 kg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
- antimony slag, water-quenched: -2.6488 kg; lognormal variance with pedigree 0.0045, pedigree (2,3,3,3,2)
  properties: aluminium content 0.045145, antimony content 0.0111, arsenic content 0.0057, calcium content 0.152946, dry mass 1 kg, iron content 0.152469, magnesium content 0.0123022, oxygen content 0.400936, silicon content 0.18885, sodium content 0.012389, sulfur content 0.0054, wet mass 1 kg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
- electricity, medium voltage: 0.000133726, 5.82023e-5, 0.00777588, 0.0120497, 0.000126594, 0.00019377, 0.00890509, 7.39007e-5, 0.029119, 0.00205389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 kWh (46 suppliers, which the file names only by identifier); sum of these 0.15271 kWh; lognormal variance with pedigree 0.0328, pedigree (5,5,5,5,5)
- heat, district or industrial, natural gas: 0.530299 MJ; lognormal variance with pedigree 0.0228, pedigree (5,5,5,5,5)
- heat, district or industrial, other than natural gas: 5.65496 MJ; lognormal variance with pedigree 0.0228, pedigree (5,5,5,5,5)
- iron ore concentrate: 0.061479 kg; lognormal variance with pedigree 0.0228, pedigree (5,5,5,5,5)
  properties: dry mass 1 kg, wet mass 1 kg
- limestone, crushed, washed: 0.0166802, 1.95626 kg (2 suppliers, which the file names only by identifier); sum of these 1.97294 kg; lognormal variance with pedigree 0.0228, pedigree (5,5,5,5,5)
  properties: carbon content, fossil 0.117257, dry mass 0.998 kg, water content 0.00200401, wet mass 1 kg
- nitrogen, liquid: 0.00430232, 0.0156737 kg (2 suppliers, which the file names only by identifier); sum of these 0.019976 kg; lognormal variance with pedigree 0.0228, pedigree (5,5,5,5,5)
  properties: dry mass 1 kg, wet mass 1 kg
- oxygen, liquid: 0.159418, 0.0437424 kg (2 suppliers, which the file names only by identifier); sum of these 0.20316 kg; lognormal variance with pedigree 0.0228, pedigree (5,5,5,5,5)
  properties: dry mass 1 kg, wet mass 1 kg
- silica sand: 1.85397 kg; lognormal variance with pedigree 0.0228, pedigree (5,5,5,5,5)
  properties: dry mass 0.99 kg, water content 0.010101, wet mass 1 kg
- stibnite concentrate: 4.009 kg; lognormal variance with pedigree 0.0033, pedigree (1,2,2,5,2)
  properties: antimony content 0.2683, dry mass 1 kg, wet mass 1 kg

## Emissions to nature
- Antimony ion [air, non-urban air or from high stacks]: 2.1883e-6 kg; lognormal variance with pedigree 0.6562, pedigree (5,5,5,5,5)
- Arsenic ion [air, non-urban air or from high stacks]: 3.9241e-6 kg; lognormal variance with pedigree 0.6562, pedigree (5,5,5,5,5)
- Cadmium II [air, non-urban air or from high stacks]: 3.1541e-6 kg; lognormal variance with pedigree 0.0562, pedigree (5,5,5,5,5)
- Carbon dioxide, fossil [air, unspecified]: 0.28456 kg; lognormal variance with pedigree 0.0903, pedigree (5,5,5,5,5)
- Dioxins, measured as 2,3,7,8-tetrachlorodibenzo-p-dioxin [air, non-urban air or from high stacks]: 4.8354e-11 kg; lognormal variance with pedigree 1.332, pedigree (5,5,5,5,5)
- Lead II [air, non-urban air or from high stacks]: 0.00030163 kg; lognormal variance with pedigree 0.6562, pedigree (5,5,5,5,5)
- Mercury II [air, non-urban air or from high stacks]: 8.0393e-8 kg; lognormal variance with pedigree 0.6562, pedigree (5,5,5,5,5)
- Particulate Matter, < 2.5 um [air, non-urban air or from high stacks]: 0.00015978 kg; lognormal variance with pedigree 0.3162, pedigree (5,5,5,5,5)
- Particulate Matter, > 10 um [air, non-urban air or from high stacks]: 4.5658e-5 kg; lognormal variance with pedigree 0.0362, pedigree (5,5,5,5,5)
- Particulate Matter, > 2.5 um and < 10um [air, non-urban air or from high stacks]: 0.00011413 kg; lognormal variance with pedigree 0.0162, pedigree (5,5,5,5,5)
- Sulfur dioxide [air, non-urban air or from high stacks]: 0.031932 kg; lognormal variance with pedigree 0.0162, pedigree (5,5,5,5,5)
- Arsenic ion [water, surface water]: 9.6708e-7 kg; lognormal variance with pedigree 0.6706, pedigree (5,5,5,5,5)
- BOD5, Biological Oxygen Demand [water, surface water]: 0.00037587 kg; lognormal variance with pedigree 0.0606, pedigree (5,5,5,5,5)
- COD, Chemical Oxygen Demand [water, surface water]: 0.00056381 kg; lognormal variance with pedigree 0.0606, pedigree (5,5,5,5,5)
- Cadmium II [water, surface water]: 2.5144e-6 kg; lognormal variance with pedigree 0.6706, pedigree (5,5,5,5,5)
- Copper ion [water, surface water]: 4.8354e-6 kg; lognormal variance with pedigree 0.6706, pedigree (5,5,5,5,5)
- DOC, Dissolved Organic Carbon [water, surface water]: 0.00022046 kg; lognormal variance with pedigree 0.0606, pedigree (5,5,5,5,5)
- Lead II [water, surface water]: 1.7407e-5 kg; lognormal variance with pedigree 0.6706, pedigree (5,5,5,5,5)
- Mercury II [water, surface water]: 4.1584e-8 kg; lognormal variance with pedigree 0.6706, pedigree (5,5,5,5,5)
- TOC, Total Organic Carbon [water, surface water]: 0.00022046 kg; lognormal variance with pedigree 0.0606, pedigree (5,5,5,5,5)

## Sampling procedure
Data retreived from:
Classen M., Althaus H.-J., Blaser S., Doka G., Jungbluth N., Tuchschmid M. (2009) Life Cycle Inventories of Metals, Final report ecoinvent data v2.1, 10, Dübendorf, CH, Swiss Centre for LCI, Empa - TSL, 3 - SeparatePublication, CD-ROM

Jianwen Chu, Jiansu Mao, Mengchang He (2019). Anthropogenic antimony flow analysis and evaluation in China. Science of The Total Environment, Volume 683. https://doi.org/10.1016/j.scitotenv.2019.05.293

## Extrapolations
see Geography and Technology This dataset has been copied from an original dataset covering the geography CN. The uncertainty has been adjusted accordingly.
