# butane-1,4-diol production

Dataset: EcoSpold 2, unit process
Geography: RoW
Time period: 1989-01-01 to 2022-12-31
Technology level: current
Classification: ISIC rev.4 ecoinvent: 2011:Manufacture of basic chemicals
Classification: EcoSpold01Categories: chemicals/organics
Synonyms: butylene glycol
Tags: ConvertedDataset
Scenario: Business-as-Usual
System model: Allocation, cut-off by classification
Share of production covered: 100 %
Generated by: Jürgen Sutter
Published in: Sutter, J. 2007
Database: ecoinvent
isCopyrightProtected: true
accessRestrictedTo: 1

## General comment
The process "c1,4-butanediol, at plant, RER" is modelled for the production of 1,4-butanediol from acetylene in Europe. Raw materials, Energy consumptions and emissions are modelled with literature data. Infrastructure and transports are calculated with standard values.
[This dataset was already contained in the ecoinvent database version 2. It was not individually updated during the transfer to ecoinvent version 3. Life Cycle Impact Assessment results may still have changed, as they are affected by changes in the supply chain, i.e. in other datasets. This dataset was generated following the ecoinvent quality guidelines for version 2. It may have been subject to central changes described in the ecoinvent version 3 change report (http://www.ecoinvent.org/database/ecoinvent-version-3/reports-of-changes/), and the results of the central updates were reviewed extensively. The changes added e.g. consistent water flows and other information throughout the database. The documentation of this dataset can be found in the ecoinvent reports of version 2, which are still available via the ecoinvent website. The change report linked above covers all central changes that were made during the conversion process.]

## Included activities end
Production of 1,4-butanediol including materials, energy uses, infrastructure and emissions.

## Geography
The inventory is modelled for Europe.

## Technology
Hydrgenation of butynediol from acetylene

## Time period
Time of publications

## Parameters
- fraction, cooling water, cooling pond system, to air: 0.032 dimensionless; name fraction_CW_CP_to_air; lognormal variance with pedigree 0.0413, pedigree (2,3,1,3,1)
  Calculated based on literature value (Scown, C.D., 2011, Water Footprint of U.S. Transportation Fuels and supplying information of the article) (Vionnet, S., Quantis Water Database - Technical Report, 2012).
- fraction, cooling water, once-through system, to air: 0.004 dimensionless; name fraction_CW_OT_to_air; lognormal variance with pedigree 0.0413, pedigree (2,3,1,3,1)
  (same comment as for fraction, cooling water, cooling pond system, to air)
- fraction, cooling water, recirculating system, to air: 0.771 dimensionless; name fraction_CW_R_to_air; lognormal variance with pedigree 0.0413, pedigree (2,3,1,3,1)
  (same comment as for fraction, cooling water, cooling pond system, to air)
- fraction, cooling water, to air: 0.3875 dimensionless; name fraction_CW_to_air; = (0.5*fraction_CW_OT_to_air)+(0.5*fraction_CW_R_to_air); lognormal variance with pedigree 0.092025, pedigree (4,4,3,2,4)
  Calculated value based on literature value (see comments of the other parametres present in this dataset) and expert opinion. In the case when no industry/literature data are available about the type of cooling or directly fraction, cooling water, to air specific for the process a default assumption is applied. It is assumed that the once-through cooling system is used in 50% of all cases and recirculating system is used in another 50% of all cases.
- fraction, process water, to air: 0.205 dimensionless; name fraction_PW_to_air; lognormal variance with pedigree 0.092025, pedigree (4,4,3,2,4)
  Literature value (Statistics Canada, 2007 & Shaffer, K.H., 2008, Consumptive water use in the Great Lakes Basin, USGS) (Vionnet, S., Quantis Water Database - Technical Report, 2012).
- fraction, water, deionised, to air: 0.205 dimensionless; name fraction_WDI_to_air; = fraction_PW_to_air; lognormal variance with pedigree 0.092025, pedigree (4,4,3,2,4)
  Calculated value. See comment in the other parametres present in this dataset. Deionised water is considered to be always used as process water, thus process water fractions to air are applied to all deionised water input flows to calculate the amount of water consumed in the processes.

## Reference product
- butane-1,4-diol: 1 kg; By-product classification allocatable product; CPC 341: Basic organic chemicals
  production volume 2.67763 kg
  properties: carbon allocation 0.533333 kg, carbon content 0.533333, carbon content, fossil 0.533333, carbon content, non-fossil 0, dry mass 1 kg, heating value, net 29.6 MJ, price 1.23759 EUR2005, water content 0, water in wet mass 0 kg, wet mass 1 kg

## Inputs from technosphere
- acetylene: 0.32 kg; lognormal variance with pedigree 0.0726, pedigree (1,3,5,5,1)
  properties: carbon content, fossil 0.923077, dry mass 1 kg, heating value, net 51.2 MJ, wet mass 1 kg
- chemical factory, organics: 4e-10 unit; lognormal variance with pedigree 0.448, pedigree (4,5,5,5,5)
- copper, cathode: 0.000204 kg; lognormal variance with pedigree 0.0026, pedigree (1,3,5,5,1)
  properties: dry mass 1 kg, wet mass 1 kg
- electricity, medium voltage: 0.0270189, 0.0135598, 0.247901, 0.00410552, 0.000804623, 0.0865902 kWh (6 suppliers, which the file names only by identifier); sum of these 0.37998 kWh; lognormal variance with pedigree 0.0726, pedigree (1,3,5,5,1)
- formaldehyde: 0.7326 kg; lognormal variance with pedigree 0.0726, pedigree (1,3,5,5,1)
  properties: carbon content, fossil 0.4, dry mass 1 kg, heating value, net 20.19 MJ, wet mass 1 kg
- heat, district or industrial, natural gas: 18.5059, 0.304099 MJ (2 suppliers, which the file names only by identifier); sum of these 18.81 MJ; lognormal variance with pedigree 0.0726, pedigree (1,3,5,5,1)
  properties: heating value, net 1 MJ
- heat, district or industrial, other than natural gas: 10.4941, 0.00486172 MJ (2 suppliers, which the file names only by identifier); sum of these 10.4989 MJ; lognormal variance with pedigree 0.0726, pedigree (1,3,5,5,1)
  properties: heating value, net 1 MJ
- hydrogen, liquid: 0.054 kg; lognormal variance with pedigree 0.0726, pedigree (1,3,5,5,1)
  properties: dry mass 1 kg, heating value, net 120.21 MJ, wet mass 1 kg
- nickel, class 1: 0.000214 kg; lognormal variance with pedigree 0.0026, pedigree (1,3,5,5,1)
  properties: dry mass 1 kg, wet mass 1 kg
- nitrogen, liquid: 0.03125 kg; lognormal variance with pedigree 0.0726, pedigree (1,3,5,5,1)
  properties: dry mass 1 kg, wet mass 1 kg
- sodium hydroxide, without water, in 50% solution state: 0.003 kg; lognormal variance with pedigree 0.0726, pedigree (1,3,5,5,1)
  properties: dry mass 1 kg, heating value, net 3.03 MJ, wet mass 1 kg
- water, deionised: 1 kg; lognormal variance with pedigree 0.0726, pedigree (1,3,5,5,1)
  properties: wet mass 1 kg

## Inputs from nature
- Water, cooling, unspecified natural origin [natural resource, in water]: 0.49 m3; lognormal variance with pedigree 0.0026, pedigree (1,3,5,5,1)

## Emissions to nature
- Butanol [air, urban air close to ground]: 3.1e-5 kg; lognormal variance with pedigree 0.0026, pedigree (1,3,5,5,1)
- Copper ion [air, urban air close to ground]: 2.26e-6 kg; lognormal variance with pedigree 0.6526, pedigree (1,3,5,5,1)
- Ethyne [air, urban air close to ground]: 4.61e-5 kg; lognormal variance with pedigree 0.0426, pedigree (1,3,5,5,1)
- Formaldehyde [air, urban air close to ground]: 5.7e-5 kg; lognormal variance with pedigree 0.0426, pedigree (1,3,5,5,1)
- NMVOC, non-methane volatile organic compounds [air, urban air close to ground]: 0.00129 kg; lognormal variance with pedigree 0.0426, pedigree (1,3,5,5,1)
- Nickel II [air, urban air close to ground]: 1.11e-8 kg; lognormal variance with pedigree 0.6526, pedigree (1,3,5,5,1)
- Water [air, unspecified]: 0.19008 m3; lognormal variance with pedigree 0.0427, pedigree (2,2,5,5,1)
- BOD5, Biological Oxygen Demand [water, surface water]: 5.78e-5 kg; lognormal variance with pedigree 0.188, pedigree (4,5,5,5,5)
- Butanol [water, surface water]: 1.1e-5 kg; lognormal variance with pedigree 0.0026, pedigree (1,3,5,5,1)
- COD, Chemical Oxygen Demand [water, surface water]: 5.78e-5 kg; lognormal variance with pedigree 0.188, pedigree (4,5,5,5,5)
- Copper ion [water, surface water]: 1.34e-6 kg; lognormal variance with pedigree 0.3026, pedigree (1,3,5,5,1)
- DOC, Dissolved Organic Carbon [water, surface water]: 1.91e-5 kg; lognormal variance with pedigree 0.188, pedigree (4,5,5,5,5)
- Formaldehyde [water, surface water]: 2.98e-5 kg; lognormal variance with pedigree 0.3026, pedigree (1,3,5,5,1)
- Nickel II [water, surface water]: 7.7e-7 kg; lognormal variance with pedigree 0.6526, pedigree (1,3,5,5,1)
- TOC, Total Organic Carbon [water, surface water]: 1.91e-5 kg; lognormal variance with pedigree 0.188, pedigree (4,5,5,5,5)
- Water [water, unspecified]: 0.30092 m3; lognormal variance with pedigree 0.0427, pedigree (2,2,5,5,1)

## Sampling procedure
Literature data

## Extrapolations
Transports are modelled with standard distances. This dataset has been copied from an original dataset covering the geography RER. The uncertainty has been adjusted accordingly.

## Review by Roland Hischier 2007-09-01
passed.
