# bisphenol A production, powder

Dataset: EcoSpold 2, unit process
Geography: RoW
Time period: 2000-01-01 to 2022-12-31
Technology level: current
Classification: ISIC rev.4 ecoinvent: 2011:Manufacture of basic chemicals
Synonyms: 4,4'-dihydroxy-2,2-diphenylpropane; diphenylolpropane; bisphenol A; bisphenol A sodium salt; 2,2-bis(4-hydroxyphenyl)propane; bisphenol A disodium salt
Scenario: Business-as-Usual
System model: Allocation, cut-off by classification
Generated by: Roland Hischier
Published in: Hischier R. 2007
Database: ecoinvent
isCopyrightProtected: true
accessRestrictedTo: 1

## General comment
This dataset represents the production of 1 kg of solid bisphenol A by catalysed condensation of phenol and acetone. Similarly to other bisphenols, bisphenol A is a colourless and odourless solid at room temperature. Bisphenol A is almost insoluble in water but readily soluble in polar medias, i.e. ethers or alcohols (Buysch 2000).
Bisphenol A is mainly used for the production of high grade plastics.
This dataset is based on stoechiometric calculations as well as approximations using data from a large chemical chemical factory (Gendorf 2016).
References:
Hischier R. (2007) Life Cycle Inventories of Packagings & Graphical Papers. ecoinvent report No. 11. Swiss Centre for Life Cycle Inventories, Dübendorf, 2007.
Gendorf (2016) Umwelterklärung 2015, Werk Gendorf Industriepark, www.gendorf.de.
Buysch H.-J. (2000) Phenol Derivatives - 4. Bisphenols (Bishydroxyarylal-kanes). In: Ullmann's Encyclopedia of Industrial Chemistry, Sixth Edition, June-2001 Electronic Release (ed. Häussinger P., Leitgeb P. and Schmücker B.), 6 th Electronic Release Edition. Wiley InterScience, New York, Online-Version un-der: http://www.mrw.interscience.wiley.com/ueic/ull_search_fs.html.

## Included activities start
The activity starts when the raw materials enter the process.

## Included activities end
This activity ends with the production of 1 kg of bisphenol A powder. The raw materials and chemicals used for production are included, as well as estimated emissions to air and water from production (incomplete), and estimated energy demand and infrastructure of the plant (approximation). Solid wastes are omitted.

## Geography
The data used has no specific geographical origin as it is based on stoechiometric calculations and estimations. It is assumed to be representative of the production processes in this geography. Some values are based on data from a large chemical factory located in Germany. These are assumed to be valid for this geography.

## Technology
Production by catalysed condensation of phenol and acetone with a yield of 98%. The inventory is based on stoechiometric calculations from the following equation: 2C6H6O + C3H6O -> C15H16O2 + H2O.The emissions to air (0.2 wt% of raw material input) and water were estimated using mass balance. Treatment of the waste water in an internal waste water treatment plant is assumed.
References:
Hischier R. (2007) Life Cycle Inventories of Packagings & Graphical Papers. ecoinvent report No. 11. Swiss Centre for Life Cycle Inventories, Dübendorf, 2007.

## Time period
Date of published literature. Some values are based on data published by the Gendorf factory that were collected between 2011 and 2015. The time period has been adjusted accordingly. For more details, see the comments of the exchanges.

## Reference product
- bisphenol A, powder: 1 kg; By-product classification allocatable product; CPC 34139: Other alcohols, phenols, phenol-alcohols, and their halogenated, sulphonated, nitrated or nitrosated derivativ[…]
  production volume 3.1388e9 kg
  properties: carbon allocation 0.789474 kg, carbon content 0.789474, carbon content, fossil 0.789474, carbon content, non-fossil 0, dry mass 1 kg, heating value, net 32.41 MJ, price 1.34 EUR2005, water content 0, water in wet mass 0 kg, wet mass 1 kg

## Inputs from technosphere
- acetone, liquid: 0.261 kg; lognormal variance with pedigree 0.1786, pedigree (4,5,5,5,5)
  properties: carbon content, fossil 0.62069, dry mass 1 kg, heating value, net 31.32 MJ, wet mass 1 kg
- chemical factory, organics: 4e-10 unit; lognormal variance with pedigree 0.3098, pedigree (2,3,2,4,3)
- electricity, medium voltage: 0.0295802, 0.0148452, 0.271401, 0.0044947, 0.000880897, 0.0947985 kWh (6 suppliers, which the file names only by identifier); sum of these 0.416 kWh; lognormal variance with pedigree 0.0104, pedigree (2,3,2,4,3)
- heat, district or industrial, natural gas: 2.11524, 0.0347588 MJ (2 suppliers, which the file names only by identifier); sum of these 2.15 MJ; lognormal variance with pedigree 0.0104, pedigree (2,3,2,4,3)
  properties: heating value, net 1 MJ
- heat, from steam, in chemical industry: 0.2 MJ; lognormal variance with pedigree 0.0104, pedigree (2,3,2,4,3)
  properties: heating value, net 1 MJ
- nitrogen, liquid: 0.019 kg; lognormal variance with pedigree 0.0104, pedigree (2,3,2,4,3)
  properties: dry mass 1 kg, wet mass 1 kg
- phenol: 0.838 kg; lognormal variance with pedigree 0.1786, pedigree (4,5,5,5,5)
  properties: carbon content, fossil 0.765957, dry mass 1 kg, heating value, net 30.93 MJ, wet mass 1 kg
- tap water: 0.00203022, 0.000150233, 0.0232328, 0.000404717, 4.8717e-5, 8.05128e-5, 5.28156e-5 kg (7 suppliers, which the file names only by identifier); sum of these 0.026 kg; lognormal variance with pedigree 0.0104, pedigree (2,3,2,4,3)
  properties: carbon content, fossil 0.00178991, dry mass 0.000337476 kg, water content 2962.17, wet mass 1 kg
- wastewater, average: -2.69042e-6, -9.57892e-9 m3 (2 suppliers, which the file names only by identifier); sum of these -2.7e-6 m3; lognormal variance with pedigree 0.0104, pedigree (2,3,1,4,3)
  properties: carbon content, non-fossil 0.194039, dry mass 0.346837 kg, water content 2882.2, wet mass 1000 kg

## Inputs from nature
- Water, cooling, unspecified natural origin [natural resource, in water]: 0.0164 m3; lognormal variance with pedigree 0.0104, pedigree (2,3,2,4,3)
- Water, river [natural resource, in water]: 0.00086 m3; lognormal variance with pedigree 0.0104, pedigree (2,3,2,4,3)
- Water, well, in ground [natural resource, in water]: 0.00083 m3; lognormal variance with pedigree 0.0104, pedigree (2,3,2,4,3)

## Emissions to nature
- Acetone [air, urban air close to ground]: 0.000565 kg; lognormal variance with pedigree 0.33, pedigree (5,5,5,5,5)
- Carbon dioxide, fossil [air, urban air close to ground]: 0.0701 kg; lognormal variance with pedigree 0.2, pedigree (5,5,5,5,4)
- Nitrogen [air, unspecified]: 0.019 kg; lognormal variance with pedigree 0.0104, pedigree (2,3,2,4,3)
- Phenol [air, urban air close to ground]: 0.00183 kg; lognormal variance with pedigree 0.33, pedigree (5,5,5,5,5)
- Water [air, unspecified]: 0.0014 m3; lognormal variance with pedigree 0.0104, pedigree (2,3,2,4,3)
- Acetone [water, surface water]: 0.00277 kg; lognormal variance with pedigree 0.51, pedigree (5,5,5,5,4)
- BOD5, Biological Oxygen Demand [water, unspecified]: 0.026379 kg; lognormal variance with pedigree 0.218, pedigree (4,5,5,5,5)
- COD, Chemical Oxygen Demand [water, unspecified]: 0.026379 kg; lognormal variance with pedigree 0.218, pedigree (4,5,5,5,5)
- DOC, Dissolved Organic Carbon [water, unspecified]: 0.00858698 kg; lognormal variance with pedigree 0.218, pedigree (4,5,5,5,5)
- Phenol [water, surface water]: 0.00898 kg; lognormal variance with pedigree 0.51, pedigree (5,5,5,5,4)
- TOC, Total Organic Carbon [water, unspecified]: 0.00858698 kg; lognormal variance with pedigree 0.218, pedigree (4,5,5,5,5)
- Water [water, unspecified]: 0.0167 m3; lognormal variance with pedigree 0.0104, pedigree (2,3,2,4,3)

## Sampling procedure
The data is based on literature and stoechiometric calculations. Process emissions are based on estimations only. Some values are calculated based on data from a large chemical factory located in Germany. For more details, see the comments of the exchanges.

## Extrapolations
This dataset has been copied from an original dataset covering the geography RER. The uncertainty has been adjusted accordingly.

## Review by Gregor Wernet 2017-08-04
This dataset was additionally reviewed in a separate review process by Eric Johnson of Atlantic Consulting as well as Emilia Moreno Ruiz and Gregor Wernet of ecoinvent.
