# folpet production

Dataset: EcoSpold 2, unit process
Geography: RoW
Time period: 2000-01-01 to 2022-12-31
Technology level: current
Classification: ISIC rev.4 ecoinvent: 2021:Manufacture of pesticides and other agrochemical products
Synonyms: Faltan; Phthaltan; Folpel; Orthophaltan
Scenario: Business-as-Usual
System model: Allocation, cut-off by classification
Share of production covered: 100 %
Generated by: Jürgen Sutter
Published in: Nemecek, T. 2007
Database: ecoinvent
isCopyrightProtected: true
accessRestrictedTo: 1

## General comment
This dataset represents the production of 1 kg of folpet from fluorspar and sulphuric acid. Folpet is the ISO common name for N-(trichloromethylthio)phthalimide or N-(trichloromethanesulfenyl)phthalimide (IUPAC, both). Folpet belongs to the class of phthalimide fungicides such as captan or captafol. Folpet is a contact fungicide and inhibits many oxidative enzymes, carboxylases and enzymes involved with phosphate metabolism and citrate synthesis. It is used to control fungal pathogens such as mildew, leaf spot and apple scab.
Raw materials are modelled with a stoichiometric calculation. Energy consumption is modelled with data from a similar process. The emissions are estimated. Water consumption is approximated based on data from a large chemical factory (Gendorf 2016).
References:
European Food Safety Authority (2009) Peer review of the pesticide risk assessment of the active substance folpet.
University of Hertfordshire. Pesticide Properties Database, folpet, http://sitem.herts.ac.uk/aeru/iupac/Reports/354.htm (last accessed on 2017-01-03).
Gendorf (2016) Umwelterklärung 2015, Werk Gendorf Industriepark, www.gendorf.de.

## Included activities start
From reception of raw materials at the factory gate.

## Included activities end
This activity ends with the production of folpet. The dataset includes the input materials, energy use, infrastructure and emissions.

## Geography
The inventory is modelled for Europe but is assumed to be representative of the global production. Some values are based on data from a large chemical factory located in Germany. These are assumed to be valid for this geography.

## Technology
Folpet is a pesticide produced in two steps from phthalic anhydride:
C8H4O3 + 2 NH3 → C8H5NO2 + 3 H2O
C8H5NO2 + CCl4S → C9H4Cl3NO2S + HCl
A precursor that is used for the folpet production is perchloromethylmercaptan (CCl4S).
Perchloromethylmercaptan (CCl4S) is produced from carbon disulfide and chlorine:
CS2 + 2 Cl2 → CCl4S + S
The formed sulfur is oxidised to SO2 with oxygen from air. The formed SO2 is then scraped with quicklime and emitted as calcium and sulfate (oxidised formed sulfite by oxygen from air).

## Time period
Time of publications. Some values are based on data published by the Gendorf factory that were collected between 2011 and 2015. The time period has been adjusted accordingly. For more details, see the comments of the exchanges.

## Reference product
- folpet: 1 kg; By-product classification allocatable product; CPC 34662: Fungicides
  production volume 3.304 kg
  properties: carbon allocation 0.363636 kg, carbon content 0.363636, carbon content, fossil 0.363636, carbon content, non-fossil 0, dry mass 1 kg, price 3.4 EUR2005, water content 0, water in wet mass 0 kg, wet mass 1 kg

## Inputs from technosphere
- ammonia, anhydrous, liquid: 0.0267697, 0.000728391, 0.00230117, 0.00694958, 0.00325618, 0.0770316, 0.00709332, 0.00358004 kg (8 suppliers, which the file names only by identifier); sum of these 0.12771 kg; lognormal variance with pedigree 0.038, pedigree (4,5,2,5,1)
  properties: dry mass 1 kg, wet mass 1 kg
- carbon disulfide: 0.28546 kg; lognormal variance with pedigree 0.038, pedigree (4,5,2,5,1)
  properties: carbon content, fossil 0.157895, dry mass 1 kg, heating value, net 32.72 MJ, wet mass 1 kg
- chemical factory, organics: 8.7814e-10 unit; lognormal variance with pedigree 0.3098, pedigree (2,3,2,4,3)
- chlorine, liquid: 0.52585 kg; lognormal variance with pedigree 0.038, pedigree (4,5,2,5,1)
  properties: dry mass 1 kg, wet mass 1 kg
- electricity, medium voltage: 0.0545055, 0.0273543, 0.500093, 0.0082821, 0.00162317, 0.174679 kWh (6 suppliers, which the file names only by identifier); sum of these 0.766537 kWh; lognormal variance with pedigree 0.038, pedigree (4,5,2,5,1)
- heat, district or industrial, natural gas: 3.28298, 0.0539479 MJ (2 suppliers, which the file names only by identifier); sum of these 3.33693 MJ; lognormal variance with pedigree 0.038, pedigree (4,5,2,5,1)
  properties: heating value, net 1 MJ
- heat, district or industrial, other than natural gas: 1.86167, 0.000862478 MJ (2 suppliers, which the file names only by identifier); sum of these 1.86253 MJ; lognormal variance with pedigree 0.038, pedigree (4,5,2,5,1)
  properties: heating value, net 1 MJ
- phthalic anhydride: 0.53888 kg; lognormal variance with pedigree 0.038, pedigree (4,5,2,5,1)
  properties: carbon content, fossil 0.648649, dry mass 1 kg, heating value, net 22.93 MJ, wet mass 1 kg
- quicklime, milled, loose: 0.199018 kg
  properties: dry mass 0.99 kg, water content 0.010101, wet mass 1 kg
- sodium hydroxide, without water, in 50% solution state: 0.13559 kg; lognormal variance with pedigree 0.038, pedigree (4,5,2,5,1)
  properties: dry mass 1 kg, heating value, net 3.03 MJ, wet mass 1 kg
- tap water: 0.00445708, 0.000329818, 0.0510047, 0.000888505, 0.000106952, 0.000176756, 0.00011595 kg (7 suppliers, which the file names only by identifier); sum of these 0.0570797 kg; lognormal variance with pedigree 0.0104, pedigree (2,3,2,4,3)
  properties: carbon content, fossil 0.00178991, dry mass 0.000337476 kg, water content 2962.17, wet mass 1 kg
- wastewater, average: -5.90648e-6, -2.10293e-8 m3 (2 suppliers, which the file names only by identifier); sum of these -5.92751e-6 m3; lognormal variance with pedigree 0.0104, pedigree (2,3,1,4,3)
  properties: carbon content, non-fossil 0.194039, dry mass 0.346837 kg, water content 2882.2, wet mass 1000 kg

## Inputs from nature
- Water, cooling, unspecified natural origin [natural resource, in water]: 0.0360041 m3; lognormal variance with pedigree 0.0104, pedigree (2,3,2,4,3)
- Water, river [natural resource, in water]: 0.00188802 m3; lognormal variance with pedigree 0.0104, pedigree (2,3,2,4,3)
- Water, well, in ground [natural resource, in water]: 0.00182216 m3; lognormal variance with pedigree 0.0104, pedigree (2,3,2,4,3)

## Emissions to nature
- Ammonia [air, urban air close to ground]: 0.00025541 kg; lognormal variance with pedigree 0.218, pedigree (4,5,5,5,5)
- Carbon dioxide, fossil [air, urban air close to ground]: 0.093493 kg; lognormal variance with pedigree 0.1786, pedigree (4,5,5,5,5)
- Chlorine [air, urban air close to ground]: 0.0010517 kg; lognormal variance with pedigree 0.188, pedigree (4,5,5,5,5)
- Sulfate [air, unspecified]: 0.340916 kg
- Water [air, unspecified]: 0.00307353 m3; lognormal variance with pedigree 0.0104, pedigree (2,3,2,4,3)
- Ammonium [water, surface water]: 0.00061299 kg; lognormal variance with pedigree 0.188, pedigree (4,5,5,5,5)
- Calcium II [water, unspecified]: 0.142237 kg
- Chloride [water, surface water]: 0.16742 kg; lognormal variance with pedigree 0.448, pedigree (4,5,5,5,5)
- Sodium I [water, surface water]: 0.077966 kg; lognormal variance with pedigree 0.798, pedigree (4,5,5,5,5)
- Water [water, unspecified]: 0.0366628 m3; lognormal variance with pedigree 0.0104, pedigree (2,3,2,4,3)

## Sampling procedure
Literature data. Some values are calculated based on data from a large chemical factory located in Germany. For more details, see the comments of the exchanges.

## Extrapolations
This dataset has been copied from an original dataset covering the geography RER. The uncertainty has been adjusted accordingly.

## Review by Emilia Moreno Ruiz 2017-08-09
This dataset was additionally reviewed in a separate review process by Eric Johnson of Atlantic Consulting as well as Emilia Moreno Ruiz and Gregor Wernet of ecoinvent.
