# textile production, nonwoven polypropylene, spunbond

Dataset: EcoSpold 2, unit process
Geography: RoW
Time period: 2013-04-01 to 2022-03-31
Technology level: current
Classification: EcoSpold01Categories: textiles/processing
Classification: ISIC rev.4 ecoinvent: 1311:Preparation and spinning of textile fibres
Scenario: Business-as-Usual
System model: Allocation, cut-off by classification
Generated by: [System]
Published in: Faist Emmenegger, M. 2018
Database: ecoinvent
isCopyrightProtected: true
accessRestrictedTo: 1

## General comment
This dataset represents the production of nonwoven textile from Polypropylene (PP) granules. This dataset is a copy of Indian dataset.
Nonwoven fabrics are broadly defined as sheet or web structures bonded together by entangling fiber or filaments (and by perforating films) mechanically, thermally or chemically. They are flat or tufted porous sheets that are made directly from separate fibers, molten plastic or plastic film. They are not made by weaving or knitting and do not require converting the fibers to yarn.
Spunbond Non Woven Fabric application:
1) Shopping bags,tablecloth,compund packing material,filter material
2) Medical field: Face mask; Surgical gown, protective colthes, operation cover,shoe cover, bed sheet etc.
3) Sanitary and Health: Baby & adult diaper, feminie hygiene, hygiene pad, spron, incontinece pad etc
4)Agriculture and horticulture covers
5)Usage:widely used alone or as components of apparel, home furnishings, health care, engineering, industrial and consumer goods etc.

## Included activities start
The process starts with arrival of PP granules

## Included activities end
This process ends with cutting and packaging of non woven spun bond polypropylene

## Geography
This dataset is a copy of Indian dataset

## Technology
The process includes opening /mixing, spinning, bonding by heated rollers, cooling, winding cutting and packaging. This process involves feeding of PP granules through hopper, and mixing them with master batch. Granules are melted by heating oil, fibres thus formed are extruded and sprayed. The fibre mesh passes under heated rollers and gets pressed into nonwoven sheets which is then cooled and cut and wound on paper tubes for sale to further processes.

## Reference product
- textile, nonwoven polypropylene: 1 kg; By-product classification allocatable product; CPC 26710: Woven fabrics of man-made filament yarn, obtained from high tenacity yarn of nylon or other polyamides, of pol[…]
  production volume 4.28544e9 kg
  properties: carbon allocation 0.857143 kg, carbon content 0.857143, carbon content, fossil 0.857143, carbon content, non-fossil 0, dry mass 1 kg, heating value, net 32.78 MJ, price 1.1325 EUR2005, water content 0, water in wet mass 0 kg, wet mass 1 kg

## Inputs from technosphere
- building, hall: 3.7037e-5 m2; lognormal variance with pedigree 0.3006, pedigree (2,1,4,5,1)
- diesel, burned in diesel-electric generating set, 18.5kW: 0.1593 MJ; lognormal variance with pedigree 0.0026, pedigree (1,4,4,5,1)
- electricity, low voltage: 0.000623985, 0.000391822, 0.000127155, 0.000176878, 0.00057066, 0.0191854, 0.0332762, 0.00912557, 9.27043e-5, 0.000501338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 kWh (46 suppliers, which the file names only by identifier); sum of these 0.8065 kWh; lognormal variance with pedigree 0.0026, pedigree (1,4,4,5,1)
- polypropylene, granulate: 1 kg; lognormal variance with pedigree 0.0026, pedigree (1,4,4,5,1)
  properties: heating value, net 32.78 MJ
- sodium hydroxide, without water, in 50% solution state: 0.025 kg; lognormal variance with pedigree 0.0106, pedigree (4,4,4,5,1)
  properties: dry mass 1 kg, heating value, net 3.03 MJ, wet mass 1 kg
- tap water: 0.00758712, 1.17331, 0.87614, 0.0204391, 0.00246032, 0.00406609, 0.00266731 kg (7 suppliers, which the file names only by identifier); sum of these 2.08667 kg; lognormal variance with pedigree 0.0106, pedigree (4,4,4,5,1)
  properties: carbon content, fossil 0.00178991, dry mass 0.000337476 kg, water content 2962.17, wet mass 1 kg
- wastewater, average: -0.00133687, -4.75976e-6, -8.03385e-6, -0.000319673 m3 (4 suppliers, which the file names only by identifier); sum of these -0.00166934 m3; lognormal variance with pedigree 0.0026, pedigree (1,4,1,5,1)
  properties: carbon content, non-fossil 0.194039, dry mass 0.346837 kg, water content 2882.2, wet mass 1000 kg

## Emissions to nature
- Water [air, unspecified]: 0.000417334 m3; lognormal variance with pedigree 0.0026, pedigree (1,4,4,5,1)

## Sampling procedure
Extrapolated from IN data, uncertainty adjusted accordingly
