# prochloraz production

Dataset: EcoSpold 2, unit process
Geography: GLO
Time period: 2021-01-01 to 2022-12-31
Technology level: current
Classification: ISIC rev.4 ecoinvent: 2011:Manufacture of basic chemicals
Scenario: Business-as-Usual
System model: Allocation, cut-off by classification
Generated by: Daria Dellenbach
Database: ecoinvent
isCopyrightProtected: true
accessRestrictedTo: 1

## General comment
This dataset represents the production of 1 kg of prochloraz. Emissions are estimated. Energy consumptions, infrastructure and transports are calculated with standard values. A yield of 95% per chemical step was assumed.
Prochloraz is an organic substance with the CAS no.: 067747-09-5. It is called 'N-propyl-N-[2-(2,4,6-trichlorophenoxy)ethyl]-1H-imidazole-1-carboxamide' under IUPAC naming and its molecular formula is: C15H16Cl3N3O2. It is solid under normal conditions of temperature and pressure with no distinct odor. It is modelled as a pure substance. Prochloraz is a fungicide which treat several diseases. It is mainly applied on cereals, field crops, fruit, vegetables and turf. For tropical and subtropical fruit, it can as well be applied post-harvest as a treatment againt storage diseases. There are no publicly available information about the consumption of this substance on industrial sites.
Reference(s):
Unger T., (1996). Pesticide Synthesis Handbook, Noyes Publication.
Sauter H., Zeeh B., (2009): Plant Growth Regulators, in Ullmanns Encyclopedia of Industrial Chemistry, Weinheim, Wiley-VCH.
Chemiepark GENDORF, Umwelterklärung 2016, https://www.gendorf.de/Nachbarn/Umweltschutz/Industrie%20und%20Nachhaltigkeit
Chemiepark GENDORF, Umwelterklärung 2017, https://www.gendorf.de/Nachbarn/Umweltschutz/Industrie%20und%20Nachhaltigkeit
Chemiepark GENDORF, Umwelterklärung 2020, https://www.gendorf.de/Nachbarn/Umweltschutz/Industrie%20und%20Nachhaltigkeit
Hischier, R. (2005) Establishing Life Cycle Inventories of Chemicals Based on Differing Data Availability (9 pp). The International Journal of Life Cycle Assessment, Volume 10, Issue 1, pp 59–67. 10.1065/lca2004.10.181.7

## Included activities start
Cradle to gate. The activity starts when the raw materials enter the process.

## Included activities end
Production of prochloraz production including materials, energy uses, infrastructure and emissions.

## Technology
This dataset represents the production of 1 kg of prochloraz.
Prochloraz is produced in five steps from phenol:
C6H6O + 3 Cl2 → C6H3Cl3O + 3 HCl
C6H3Cl3O + C2H4Br2 → C8H6Cl3BrO + HBr
C8H6Cl3BrO + C3H9N → C11H13Cl3NO + HBr
C11H13Cl3NO + COCl2 → C12H14Cl4NO2 + HCl
C12H14Cl4NO2 + C3H4N2 → C15H16Cl3N3O2 + HCl
Sodium hydroxide is added to neutralise the formed hydrochloric acid and released to water as sodium, chloride and water.
Reference(s):
Unger T., (1996). Pesticide Synthesis Handbook, Noyes Publication.
Sauter H., Zeeh B., (2009): Plant Growth Regulators, in Ullmanns Encyclopedia of Industrial Chemistry, Weinheim, Wiley-VCH.

## Reference product
- prochloraz: 1 kg; By-product classification allocatable product; CPC 34662: Fungicides
  production volume 1.76821e7 kg
  properties: carbon allocation 0.47832 kg, carbon content 0.47832, carbon content, fossil 0.47832, carbon content, non-fossil 0, dry mass 1 kg, price 3.54061 EUR2005, water content 0, water in wet mass 0 kg, wet mass 1 kg

## Inputs from technosphere
- 1-propanol: 0.329242 kg; lognormal variance with pedigree 0.0098, pedigree (2,5,2,2,2)
  properties: carbon content, fossil 0.6, dry mass 1 kg, heating value, net 34.3 MJ, wet mass 1 kg
- ammonium chloride: 0.150232 kg; lognormal variance with pedigree 0.0098, pedigree (2,5,2,2,2)
  properties: dry mass 1 kg, wet mass 1 kg
- chemical factory, organics: 1.6e-9 unit; lognormal variance with pedigree 0.3492, pedigree (2,5,2,4,4)
- chlorine, liquid: 0.100084, 0.500328 kg (2 suppliers, which the file names only by identifier); sum of these 0.600413 kg; lognormal variance with pedigree 0.0098, pedigree (2,5,2,2,2)
  properties: dry mass 1 kg, wet mass 1 kg
- compressed air, 1000 kPa gauge: 0.523109, 1.28553 m3 (2 suppliers, which the file names only by identifier); sum of these 1.80864 m3; lognormal variance with pedigree 0.0498, pedigree (2,5,2,4,4)
- electricity, medium voltage: 1.59624 kWh; lognormal variance with pedigree 0.0498, pedigree (2,5,2,4,4)
- ethylene bromide: 0.174113, 0.353502 kg (2 suppliers, which the file names only by identifier); sum of these 0.527615 kg; lognormal variance with pedigree 0.0098, pedigree (2,5,2,2,2)
  properties: carbon content, fossil 0.127871, dry mass 1 kg, heating value, net 6.45 MJ, wet mass 1 kg
- heat, district or industrial, natural gas: 7.546 MJ; lognormal variance with pedigree 0.0498, pedigree (2,5,2,4,4)
  properties: heating value, net 1 MJ
- heat, from steam, in chemical industry: 0.706615, 0.124585 MJ (2 suppliers, which the file names only by identifier); sum of these 0.8312 MJ; lognormal variance with pedigree 0.0498, pedigree (2,5,2,4,4)
  properties: heating value, net 1 MJ
- imidazole: 0.191201 kg; lognormal variance with pedigree 0.0098, pedigree (2,5,2,2,2)
  properties: carbon content, fossil 0.529288, dry mass 1 kg, heating value, net 23.16 MJ, wet mass 1 kg
- nitrogen, liquid: 0.0127605, 0.0464875 kg (2 suppliers, which the file names only by identifier); sum of these 0.059248 kg; lognormal variance with pedigree 0.0498, pedigree (2,5,2,4,4)
  properties: dry mass 1 kg, wet mass 1 kg
- phenolic resin: 0.0459908, 0.218324 kg (2 suppliers, which the file names only by identifier); sum of these 0.264315 kg; lognormal variance with pedigree 0.0098, pedigree (2,5,2,2,2)
  properties: carbon content, fossil 0.772277, dry mass 1 kg, heating value, net 33.57 MJ, wet mass 1 kg
- phosgene, liquid: 0.0923023, 0.186901 kg (2 suppliers, which the file names only by identifier); sum of these 0.279203 kg; lognormal variance with pedigree 0.0098, pedigree (2,5,2,2,2)
  properties: carbon content, fossil 0.122449, dry mass 1 kg, heating value, net 3.68 MJ, wet mass 1 kg
- sodium hydroxide, without water, in 50% solution state: 0.637102 kg; lognormal variance with pedigree 0.0098, pedigree (2,5,2,1,2)
  properties: dry mass 1 kg, heating value, net 3.03 MJ, wet mass 1 kg
- tap water: 0.09 kg; lognormal variance with pedigree 0.0498, pedigree (2,5,2,4,4)
  properties: carbon content, fossil 0.00178991, dry mass 0.000337476 kg, water content 2962.17, wet mass 1 kg
- wastewater, average: -7.29404e-6, -2.59696e-8, -4.38332e-8, -1.74415e-6 m3 (4 suppliers, which the file names only by identifier); sum of these -9.108e-6 m3; lognormal variance with pedigree 0.0498, pedigree (2,5,1,4,4)
  properties: carbon content, non-fossil 0.194039, dry mass 0.346837 kg, water content 2882.2, wet mass 1000 kg

## Inputs from nature
- Water, cooling, unspecified natural origin [natural resource, in water]: 0.058828 m3; lognormal variance with pedigree 0.0498, pedigree (2,5,2,4,4)
- Water, river [natural resource, in water]: 0.00386172 m3; lognormal variance with pedigree 0.0498, pedigree (2,5,2,4,4)
- Water, well, in ground [natural resource, in water]: 0.00326608 m3; lognormal variance with pedigree 0.0498, pedigree (2,5,2,4,4)

## Emissions to nature
- Carbon dioxide, fossil [air, unspecified]: 0.334158 kg; lognormal variance with pedigree 0.0098, pedigree (2,5,2,2,2)
- Chlorine [air, unspecified]: 0.00300206 kg; lognormal variance with pedigree 0.0492, pedigree (2,5,2,2,2)
- Nitrogen [air, unspecified]: 0.059248 kg; lognormal variance with pedigree 0.0892, pedigree (2,5,2,4,4)
- Phosgene [air, unspecified]: 0.00139601 kg; lognormal variance with pedigree 0.0492, pedigree (2,5,2,2,2)
- Propanol [air, unspecified]: 0.00157566 kg; lognormal variance with pedigree 0.0492, pedigree (2,5,2,2,2)
- Water [air, unspecified]: 0.00612033 m3; lognormal variance with pedigree 0.0892, pedigree (2,5,2,4,4)
- Ammonium [water, unspecified]: 0.00240643 kg; lognormal variance with pedigree 0.0492, pedigree (2,5,2,2,2)
- BOD5, Biological Oxygen Demand [water, unspecified]: 0.018518 kg; lognormal variance with pedigree 0.0492, pedigree (2,5,2,2,2)
- Bromide [water, surface water]: 0.424263 kg; lognormal variance with pedigree 0.0492, pedigree (2,5,2,2,2)
- COD, Chemical Oxygen Demand [water, unspecified]: 0.018518 kg; lognormal variance with pedigree 0.0492, pedigree (2,5,2,2,2)
- Chloride [water, unspecified]: 0.593051 kg; lognormal variance with pedigree 0.0492, pedigree (2,5,2,2,2)
- DOC, Dissolved Organic Carbon [water, unspecified]: 0.00479546 kg; lognormal variance with pedigree 0.0492, pedigree (2,5,2,2,2)
- Sodium I [water, surface water]: 0.366198 kg; lognormal variance with pedigree 0.0492, pedigree (2,5,2,2,2)
- TOC, Total Organic Carbon [water, unspecified]: 0.00479546 kg; lognormal variance with pedigree 0.0492, pedigree (2,5,2,2,2)
- Water [water, unspecified]: 0.0602078 m3; lognormal variance with pedigree 0.0892, pedigree (2,5,2,4,4)

## Sampling procedure
Literature data and stoichiometric calculation. This inventory is partially based on a generic model of the production of chemicals. The data generated by this model have been improved with compound-specific data when available.
The model of the production of chemicals is using specific industry or literature data wherever possible and more generic data on chemical production processes to fill compound-specific data gaps when necessary. The basic principles of the model have been published in literature (Hischier, 2005). The model has been updated and extended with newly available data from the chemical industry.
In the model, unreacted fractions are treated in a waste treatment process, and emissions reported are after a waste treatment process that is included in the scope of this dataset. For volatile reactants, a small level of evaporation is assumed. Solvents and catalysts are mostly recycled in closed-loop systems within the scope of the dataset and reported flows are for losses from this system.
The main source of information for the values for heat, electricity, water (process and cooling), nitrogen, chemical factory is industry data from the GENDORF Chemical Park. The values are a 5-year average of data from 2015 to 2019 published by the GENDORF Chemical Park, which is based in Germany and produced an average of 2462760 tonnes of chemical substances in the years 2015-2019.

Reference(s):
Hischier, R. (2005) Establishing Life Cycle Inventories of Chemicals Based on Differing Data Availability (9 pp). The International Journal of Life Cycle Assessment, Volume 10, Issue 1, pp 59–67. 10.1065/lca2004.10.181.7
Chemiepark GENDORF, Umwelterklärung 2016, https://www.gendorf.de/Nachbarn/Umweltschutz/Industrie%20und%20Nachhaltigkeit
Chemiepark GENDORF, Umwelterklärung 2017, https://www.gendorf.de/Nachbarn/Umweltschutz/Industrie%20und%20Nachhaltigkeit
Chemiepark GENDORF, Umwelterklärung 2020, https://www.gendorf.de/Nachbarn/Umweltschutz/Industrie%20und%20Nachhaltigkeit
Unger T., (1996). Pesticide Synthesis Handbook, Noyes Publication.
Sauter H., Zeeh B., (2009): Plant Growth Regulators, in Ullmanns Encyclopedia of Industrial Chemistry, Weinheim, Wiley-VCH.
