# electricity production, nuclear, pressure water reactor

Dataset: EcoSpold 2, unit process
Geography: BR-South-eastern/Mid-western grid
Time period: 2014-01-01 to 2022-12-31
Technology level: modern
Classification: ISIC rev.4 ecoinvent: 3510:Electric power generation, transmission and distribution
Synonyms: PWR
Tags: nuclear power
Scenario: Business-as-Usual
System model: Allocation, cut-off by classification
Generated by: [Current User]
Published in: Dones, R. 2007
Database: ecoinvent
isCopyrightProtected: true
accessRestrictedTo: 1

## General comment
This dataset represents the production of high voltage electricity at a grid-connected nuclear pressure water reactor (PWR) on BR-South-eastern/Mid-western grid in 2014.
It is a copy of the dataset 'electricity production, nuclear, pressure water reactor, CH, 1995-2002', i.e. of a dataset with data for a Swiss nuclear PWR. The basic source for all exchanges is therefore the ecoinvent report 'Kernenergie' (see Modelling and Administrative).
The average burnup 53 MWd/kg heavy metal of finally discharged fuel elements from the 2000/2002 fuel cycles has been assumed representative for the lifetime of the modeled plant (the burnup has increased from the initial about 33 MWd/kg heavy metal and may increase to 55 MWd/kg heavy metal in the future). The average burnup corresponds to an average enrichment of 4.2% U235 for fresh uranium fuel elements. Over the lifetime of the plant it can be assumed that 8% of the energy will be produced by MOX fuel elements. Of total fuel elements 92% are assumed to be from fresh U (thus burdened by the full upstream chain), and 8% MOX (burdened by reprocessing). For the calculation of the total net electricity delivered in 40 years lifetime, the sum of the actual production till 2002 and the prospective (8000 GWh/a) till end of life using is considered; this gives 3.11E11 kWh; the inverse gives the utilisation factor for the infrastructure. Partial information on material requirements during operation for 1991/1992 are available, which are integrated with relevant information for the modeled boiling water reactor. The diesel requirements for the yearly test of diesel emergency generators are accounted for. Radioactive emission species to air and water are weighted averages of the emissions of the nuclear power plants Gösgen and Beznau I+II from 1995 to 2002. Alpha aerosols emission to air have been described with 'aerosols, unspecified'. Considered radioactive waste streams are: spent fuel to reprocessing (40%) and conditioning (60%); operational low active waste for conditioning in the intermediate repository; and, contaminated waste from dismantling.
[This dataset is meant to replace the following datasets:]
The original ecoinvent dataset used as a basis was 'electricity production, nuclear, pressure water reactor, BR, 1990 - 2015' and it has been copied in '12/2017'
[This dataset is meant to replace the following datasets:
- electricity production, nuclear, pressure water reactor, BR, 1990 - 2015]

## Included activities start
From the constructed power plant ready to produce electricity and from the fuel ready in the power plant.

## Included activities end
This activity ends with 1kWh of high voltage electricity produced at the power plant and arrived at the busbar.

The module includes fuel elements, chemicals, and diesel requirements as well as the relevant transport requirements. Water use for cooling is included, but no cooling tower infrastructure. Considered radioactive waste streams are: spent fuel to conditioning (no reprocessing); operational low active waste for conditioning in the intermediate repository; and, contaminated waste from dismantling. Non-radioactive wastes are accounted for.

## Time period
The Annual Production Volume is valid for the year 2014

## Parameters
- fraction, cooling water, to air: 0.0297487 dimensionless; name fraction_CW_to_air; = (0*recirculating_CS_fraction_from_allCS+WConsumption_EP_nuclear_onceT_andCP_CS*once_through_andCP_CS_fractio_from_allCS)/(0*recirculating_CS_fraction_from_allCS+WWithdrawal_EP_nuclear_onceT_andCP_CS*once_through_andCP_CS_fractio_from_allCS); lognormal variance with pedigree 0.092025, pedigree (4,4,3,2,4)
  Calculated value based on literature value (Scown, 2011 & Floerke, 2009, Future changes of freshwater needs in the electricity production sector & Stiegel, 2008, Estimating Freshwater Needs to Meet Future Thermoelectric Generation Requirements) (Vionnet, S., Quantis Water Database - Technical Report, 2012).
- fraction, water, decarbonised, to air: 0.0297487 dimensionless; name fraction_WDC_to_air; = fraction_CW_to_air; lognormal variance with pedigree 0.092025, pedigree (4,4,3,2,4)
  Calculated value. See comments in the other parametres present in this dataset. Decarbonised water is considered to be always used as cooling water, thus cooling water fractions to air are applied to all carbonised water input flows to calculate the amount of water consumed in the processes.
  nan
- once-through and cooling pond cooling systems as a fraction of all cooling syste: 1 dimensionless; name once_through_andCP_CS_fractio_from_allCS; lognormal variance with pedigree 0.092025, pedigree (4,4,3,2,4)
  Literature value
  Research from Raptis & Pfister (2016), indicates that all BR nuclear power plants use once-through cooling.
  CE Raptis, S Pfister: Global freshwater thermal emissions from steam-electric power plants with once-through cooling systems. Energy, 2016.
- recirculating cooling system as a fraction of all cooling systems: 0 dimensionless; name recirculating_CS_fraction_from_allCS
  (same comment as for once-through and cooling pond cooling systems as a fraction of all coo)
- water consumption, electricity production, nuclear, once-T and coolingP CS: 6.34442e-6 m3/kWh; name WConsumption_EP_nuclear_onceT_andCP_CS; = (WWithdrawal_EP_nuclear_onceT_andCP_CS*0.00296)/0.0995; lognormal variance with pedigree 0.092025, pedigree (4,4,3,2,4)
  With data estimated based on literature (Scown, 2011, Water Footprint of U.S. Transportation Fuels, SI). And in the absence of information from Brazil, we respect the proportion of the original dataset.
- water withdrawal, electricity production, nuclear, once-T and coolingP CS: 0.000213267 m3/kWh; name WWithdrawal_EP_nuclear_onceT_andCP_CS; = (once_through_andCP_CS_fractio_from_allCS)*(3199000/15000000000); lognormal variance with pedigree 0.092025, pedigree (4,4,3,2,4)
  About water (3.199.000 m³), the parameter was estimated based on literature (ELETROBRÁS, 2014). Relatório Anual e de Sustentabilidade 2014 - Água - Eletrobras. page 179.
  About electricity production (15.000.000.000 KWh), data was obtained from the reports of the Ministry of Mines and Energy of Brazil (MME, 2016) for the year 2015.
  ELETROBRÁS, 2014a. Relatório Anual e de Sustentabilidade 2014 – Água - Eletrobras.
  MME (2016). Matrizes Elétricas Estaduais: Ano Referência 2015. Edição de 23 de novembro de 2016. Ministério De Minas E Energia - MME. Secretaria De Planejamento E Desenvolvimento Energético. Núcleo De Estudos Estratégicos De Energia.

## Reference product
- electricity, high voltage: 1 kWh; By-product classification allocatable product; CPC 17100: Electrical energy
  production volume 1.04777e10 kWh
  properties: carbon allocation 0 kg, carbon content 0, price 0.0977 EUR2005

## Inputs from technosphere
- acetylene: 3.6e-8 kg; lognormal variance with pedigree 0.0483, pedigree (2,2,5,5,2)
  properties: carbon content, fossil 0.923077, dry mass 1 kg, heating value, net 51.2 MJ, wet mass 1 kg
- anionic resin: 6.43e-8 kg; lognormal variance with pedigree 0.0439, pedigree (2,2,5,5,2)
  properties: carbon content, fossil 0.680721, dry mass 0.5 kg, heating value, net 9.09 MJ, water content 1, wet mass 1 kg
- argon, liquid: 2.61e-5 kg; lognormal variance with pedigree 0.0439, pedigree (2,2,5,5,2)
  properties: dry mass 1 kg, wet mass 1 kg
- boric acid, anhydrous, powder: 6.43e-8 kg; lognormal variance with pedigree 0.0439, pedigree (2,2,5,5,2)
  properties: dry mass 1 kg, wet mass 1 kg
- cast iron: 1.29e-7 kg; lognormal variance with pedigree 0.0439, pedigree (2,2,5,5,2)
  properties: carbon content, fossil 0.04, dry mass 1 kg, wet mass 1 kg
- cationic resin: 6.43e-8 kg; lognormal variance with pedigree 0.0439, pedigree (2,2,5,5,2)
  properties: carbon content, fossil 0.521606, dry mass 0.5 kg, heating value, net 6.68 MJ, water content 1, wet mass 1 kg
- cement, Portland: 9.19e-7 kg; lognormal variance with pedigree 0.0439, pedigree (2,2,5,5,2)
  properties: dry mass 1 kg, wet mass 1 kg
- cement, unspecified: 3.1e-7 kg; lognormal variance with pedigree 0.5127, pedigree (3,3,4,3,3)
  properties: dry mass 1 kg, wet mass 1 kg
- chemical, inorganic: 2.34e-6 kg; lognormal variance with pedigree 0.0439, pedigree (2,2,5,5,2)
  properties: carbon content, fossil 0.003, dry mass 1 kg, wet mass 1 kg
- chemical, organic: 1.38e-6 kg; lognormal variance with pedigree 0.0439, pedigree (2,2,5,5,2)
  properties: carbon content, fossil 0.628, dry mass 1 kg, heating value, net 19.03 MJ, wet mass 1 kg
- concrete, normal strength: 9.74e-9 m3; lognormal variance with pedigree 0.0439, pedigree (2,2,5,5,2)
  properties: dry mass 2190 kg, water content 0.086758, wet mass 2380 kg
- diesel, burned in diesel-electric generating set, 10MW: 0.00037 MJ; lognormal variance with pedigree 0.0439, pedigree (2,2,5,5,2)
  properties: heating value, net 1 MJ
- flat glass, coated: 4.37e-6 kg; lognormal variance with pedigree 0.0439, pedigree (2,2,5,5,2)
  properties: dry mass 1 kg, wet mass 1 kg
- fly ash and scrubber sludge: -2.19e-6 kg; lognormal variance with pedigree 0.0439, pedigree (2,2,5,5,2)
  properties: carbon content, fossil 0.167, dry mass 0.1 kg, water content 9, wet mass 1 kg
- hazardous waste, for incineration: -9.7e-7 kg; lognormal variance with pedigree 0.0439, pedigree (2,2,5,5,2)
  properties: carbon content, fossil 0.554667, dry mass 0.75 kg, heating value, net 17 MJ, water content 0.333333, wet mass 1 kg
- hydrogen, liquid: 1.03e-5 kg; lognormal variance with pedigree 0.0439, pedigree (2,2,5,5,2)
  properties: dry mass 1 kg, heating value, net 120.21 MJ, wet mass 1 kg
- low level radioactive waste: -1.8032e-9 m3; lognormal variance with pedigree 0.0439, pedigree (2,2,5,5,2)
  properties: dry mass 2500 kg, wet mass 2500 kg
- low level radioactive waste for final repository: -2.84e-8 m3; lognormal variance with pedigree 0.0439, pedigree (2,2,5,5,2)
  properties: dry mass 2500 kg, wet mass 2500 kg
- lubricating oil: 1.62e-6 kg; lognormal variance with pedigree 0.0439, pedigree (2,2,5,5,2)
  properties: carbon content, fossil 0.75, dry mass 1 kg, heating value, net 40.2 MJ, wet mass 1 kg
- nitrogen, liquid: 6.17e-5 kg; lognormal variance with pedigree 0.0439, pedigree (2,2,5,5,2)
  properties: dry mass 1 kg, wet mass 1 kg
- nuclear fuel element, for pressure water reactor, UO2 4.2% & MOX: 2.46e-6 kg; lognormal variance with pedigree 0.0439, pedigree (2,2,5,5,2)
  properties: dry mass 1 kg, wet mass 1 kg
- nuclear power plant, pressure water reactor, 1000MW: 3.22e-12 unit; lognormal variance with pedigree 0.0439, pedigree (2,2,5,5,2)
- oxygen, liquid: 1.67e-5 kg; lognormal variance with pedigree 0.0439, pedigree (2,2,5,5,2)
  properties: dry mass 1 kg, wet mass 1 kg
- paper, woodfree, coated: 6.43e-7 kg; lognormal variance with pedigree 0.0439, pedigree (2,2,5,5,2)
  properties: carbon content, fossil 0.0590617, carbon content, non-fossil 0.22775, dry mass 0.945 kg, heating value, net 14.11 MJ, water content 0.0582011, wet mass 1 kg
- pitch: 7.71e-7 kg; lognormal variance with pedigree 0.0439, pedigree (2,2,5,5,2)
  properties: carbon content, fossil 0.83, dry mass 1 kg, heating value, net 28 MJ, wet mass 1 kg
- reinforcing steel: 4.7e-7 kg; lognormal variance with pedigree 0.0439, pedigree (2,2,5,5,2)
  properties: carbon content, fossil 0.004, dry mass 1 kg, wet mass 1 kg
- sodium hypochlorite, without water, in 15% solution state: 1.73e-5 kg; lognormal variance with pedigree 0.0439, pedigree (2,2,5,5,2)
  properties: dry mass 1 kg, wet mass 1 kg
- spent nuclear fuel: -2.464e-6 kg; lognormal variance with pedigree 0.0439, pedigree (2,2,5,5,2)
  properties: dry mass 1 kg, wet mass 1 kg
- steel, low-alloyed, hot rolled: 1.6e-6 kg; lognormal variance with pedigree 0.0439, pedigree (2,2,5,5,2)
  properties: carbon content, fossil 0.005, dry mass 1 kg, wet mass 1 kg
- waste mineral oil: -1.63e-6 kg; lognormal variance with pedigree 0.0439, pedigree (2,2,5,5,2)
  properties: carbon content, fossil 0.864444, dry mass 0.9 kg, heating value, net 34.7 MJ, water content 0.111111, wet mass 1 kg
- water, decarbonised: 2.83743 kg; lognormal variance with pedigree 0.0483, pedigree (2,2,5,5,2)
  properties: wet mass 1 kg

## Inputs from nature
- Water, cooling, unspecified natural origin [natural resource, in water]: 0.000213267 m3; lognormal variance with pedigree 0.01, pedigree (1,1,3,1,1)

## Emissions to nature
- Aerosols, radioactive, unspecified [air, non-urban air or from high stacks]: 5.37e-9 kBq; lognormal variance with pedigree 0.0439, pedigree (2,2,5,5,2)
- Antimony-124 [air, non-urban air or from high stacks]: 4.75e-10 kBq; lognormal variance with pedigree 0.0439, pedigree (2,2,5,5,2)
- Antimony-125 [air, non-urban air or from high stacks]: 2.34e-8 kBq; lognormal variance with pedigree 0.0439, pedigree (2,2,5,5,2)
- Barium-140 [air, non-urban air or from high stacks]: 3.17e-10 kBq; lognormal variance with pedigree 0.0439, pedigree (2,2,5,5,2)
- Caesium-137 [air, non-urban air or from high stacks]: 7.28e-9 kBq; lognormal variance with pedigree 0.0439, pedigree (2,2,5,5,2)
- Carbon-14 [air, non-urban air or from high stacks]: 0.00764 kBq; lognormal variance with pedigree 0.0439, pedigree (2,2,5,5,2)
- Cobalt-58 [air, non-urban air or from high stacks]: 1.64e-8 kBq; lognormal variance with pedigree 0.0439, pedigree (2,2,5,5,2)
- Cobalt-60 [air, non-urban air or from high stacks]: 7.57e-8 kBq; lognormal variance with pedigree 0.0439, pedigree (2,2,5,5,2)
- Iodine-131 [air, non-urban air or from high stacks]: 3.38e-6 kBq; lognormal variance with pedigree 0.0439, pedigree (2,2,5,5,2)
- Iodine-133 [air, non-urban air or from high stacks]: 1.82e-6 kBq; lognormal variance with pedigree 0.0439, pedigree (2,2,5,5,2)
- Krypton-85m [air, non-urban air or from high stacks]: 0.00987 kBq; lognormal variance with pedigree 0.0439, pedigree (2,2,5,5,2)
- Niobium-95 [air, non-urban air or from high stacks]: 1.12e-10 kBq; lognormal variance with pedigree 0.0439, pedigree (2,2,5,5,2)
- Noble gases, radioactive, unspecified [air, non-urban air or from high stacks]: 0.259 kBq; lognormal variance with pedigree 0.0439, pedigree (2,2,5,5,2)
- Radioactive species, other beta emitters [air, non-urban air or from high stacks]: 8.67e-8 kBq; lognormal variance with pedigree 0.0439, pedigree (2,2,5,5,2)
- Silver-110 [air, non-urban air or from high stacks]: 3.13e-9 kBq; lognormal variance with pedigree 0.0439, pedigree (2,2,5,5,2)
- Water [air, unspecified]: 9.07544e-5 m3; lognormal variance with pedigree 0.092025, pedigree (4,4,4,2,4)
- Xenon-133 [air, non-urban air or from high stacks]: 0.604 kBq; lognormal variance with pedigree 0.0439, pedigree (2,2,5,5,2)
- Xenon-135 [air, non-urban air or from high stacks]: 0.166 kBq; lognormal variance with pedigree 0.0439, pedigree (2,2,5,5,2)
- Zirconium-95 [air, non-urban air or from high stacks]: 5.78e-8 kBq; lognormal variance with pedigree 0.0439, pedigree (2,2,5,5,2)
- Antimony-122 [water, surface water]: 9.04e-7 kBq; lognormal variance with pedigree 0.0439, pedigree (2,2,5,5,2)
- Antimony-124 [water, surface water]: 4.13e-5 kBq; lognormal variance with pedigree 0.0439, pedigree (2,2,5,5,2)
- Antimony-125 [water, surface water]: 4.17e-5 kBq; lognormal variance with pedigree 0.0439, pedigree (2,2,5,5,2)
- Caesium-134 [water, surface water]: 3.77e-6 kBq; lognormal variance with pedigree 0.0439, pedigree (2,2,5,5,2)
- Caesium-136 [water, surface water]: 2.81e-7 kBq; lognormal variance with pedigree 0.0439, pedigree (2,2,5,5,2)
- Caesium-137 [water, surface water]: 0.0001 kBq; lognormal variance with pedigree 0.0439, pedigree (2,2,5,5,2)
- Cerium-141 [water, surface water]: 1.76e-7 kBq; lognormal variance with pedigree 0.0439, pedigree (2,2,5,5,2)
- Cerium-144 [water, surface water]: 4.82e-7 kBq; lognormal variance with pedigree 0.0439, pedigree (2,2,5,5,2)
- Chromium-51 [water, surface water]: 7.56e-6 kBq; lognormal variance with pedigree 0.0439, pedigree (2,2,5,5,2)
- Cobalt-57 [water, surface water]: 8.92e-6 kBq; lognormal variance with pedigree 0.0439, pedigree (2,2,5,5,2)
- Cobalt-58 [water, surface water]: 0.00114 kBq; lognormal variance with pedigree 0.0439, pedigree (2,2,5,5,2)
- Cobalt-60 [water, surface water]: 0.000395 kBq; lognormal variance with pedigree 0.0439, pedigree (2,2,5,5,2)
- Hydrogen-3, Tritium [water, surface water]: 1.86 kBq; lognormal variance with pedigree 0.04, pedigree (1,1,3,1,1)
- Iodine-131 [water, surface water]: 8.21e-6 kBq; lognormal variance with pedigree 0.0439, pedigree (2,2,5,5,2)
- Iodine-133 [water, surface water]: 4.16e-7 kBq; lognormal variance with pedigree 0.0439, pedigree (2,2,5,5,2)
- Iron-59 [water, surface water]: 4.2e-7 kBq; lognormal variance with pedigree 0.0439, pedigree (2,2,5,5,2)
- Lanthanum-140 [water, surface water]: 4.95e-7 kBq; lognormal variance with pedigree 0.0439, pedigree (2,2,5,5,2)
- Manganese-54 [water, surface water]: 1.31e-5 kBq; lognormal variance with pedigree 0.0439, pedigree (2,2,5,5,2)
- Molybdenum-99 [water, surface water]: 6e-9 kBq; lognormal variance with pedigree 0.0439, pedigree (2,2,5,5,2)
- Niobium-95 [water, surface water]: 3.07e-6 kBq; lognormal variance with pedigree 0.0439, pedigree (2,2,5,5,2)
- Radioactive species, alpha emitters [water, surface water]: 3.02e-8 kBq; lognormal variance with pedigree 0.0439, pedigree (2,2,5,5,2)
- Ruthenium-103 [water, surface water]: 2.85e-7 kBq; lognormal variance with pedigree 0.0439, pedigree (2,2,5,5,2)
- Silver-110 [water, surface water]: 4.43e-6 kBq; lognormal variance with pedigree 0.0439, pedigree (2,2,5,5,2)
- Sodium-24 [water, surface water]: 9.98e-6 kBq; lognormal variance with pedigree 0.0439, pedigree (2,2,5,5,2)
- Strontium-89 [water, surface water]: 3.65e-6 kBq; lognormal variance with pedigree 0.0439, pedigree (2,2,5,5,2)
- Strontium-90 [water, surface water]: 1.3e-6 kBq; lognormal variance with pedigree 0.0439, pedigree (2,2,5,5,2)
- Technetium-99m [water, surface water]: 2.81e-6 kBq; lognormal variance with pedigree 0.0439, pedigree (2,2,5,5,2)
- Tellurium-123m [water, surface water]: 1.57e-6 kBq; lognormal variance with pedigree 0.0439, pedigree (2,2,5,5,2)
- Tellurium-132 [water, surface water]: 8.42e-8 kBq; lognormal variance with pedigree 0.0439, pedigree (2,2,5,5,2)
- Water [water, unspecified]: 0.00295994 m3; lognormal variance with pedigree 0.092025, pedigree (4,4,4,2,4)
- Zinc-65 [water, surface water]: 2.63e-7 kBq; lognormal variance with pedigree 0.0439, pedigree (2,2,5,5,2)
- Zirconium-95 [water, surface water]: 1.5e-6 kBq; lognormal variance with pedigree 0.0439, pedigree (2,2,5,5,2)

## Sampling procedure
Literature, statistics of radioactive emissions, and information from operators.

## Extrapolations
This datasets is based on a dataset valid for Switzerland (CH). Data quality for this Swiss dataset is high. Geographical uncertainty has been adjusted accordingly.

The Swiss dataset is valid for the whole lifetime of the reactor. Temporal uncertainty has been adjusted accordingly.

Updated data for regionalization of Brazil (2014-2017):
- Annual Production Volume
- Cooling water consumption (once-through cooling)
