# heat and power co-generation, lignite

Dataset: EcoSpold 2, unit process
Geography: SK
Time period: 1980-01-01 to 2022-12-31
Technology level: modern
Classification: EcoSpold01Categories: hard coal/power plants
Classification: ISIC rev.4 ecoinvent: 3510:Electric power generation, transmission and distribution
Synonyms: brown coal; sub-bituminous coal
Tags: coal power; lignite power; fossil fuels
Scenario: Business-as-Usual
System model: Allocation, cut-off by classification
Generated by: Karin Treyer
Published in: Röder, A. 2007
Database: ecoinvent
isCopyrightProtected: true
accessRestrictedTo: 1

## General comment
This dataset represents the production of high voltage electricity and district heat in an average combined heat and power lignite power plant in Slovak Republic in 2012. "Lignite" is used as representant for "brown coal", which includes sub-bituminous coal and lignite according to the definition of the IEA electricity information 2014. (IEA. 2014. Electricity Information 2014. ISBN 978-92-64-21692-1. International Energy Agency (IEA), Paris Cedex (FR).)
All exchanges in this dataset except for emissions of SO2, NOx and particles are production-weighted averages of the figures in the datasets in ecoinvent version two, which are valid for the following 10 countries: AT, BA, CZ, DE, ES, FR, HU, PL, SI, SK. The exception values are production-weighted averages of version 2 countries and the new countries in version 3 (AU, CA, CL, ID, IN, KR, MX, MY, PE, RU, TH, TR, TW, TZ, UA, ZA)
Comments on the inventory data of emissions:
- for the assessment of main characteristics (sulphur and ash content of coal, efficiency of the plant) and CO2 a bottom-up approach has been used. It consists in the collection of information about single plants.
- Halogene emissions have been estimated on the basis of the content of the species in the country-specific coal input mix, assuming average retention rates.
- For CO and particle emissions average values for the former UCTE are included (Union for the Coordination of the Transmission of Electricity, since 2009 replaced by ENTSO-E European Network of Transmission System Operators for Electricity).
- The country specific emissions of N2O depend on the share of DeNOx. - Emissions of trace elements were calculated by means of a formula (CORINAIR) using the ash content in the country-specific coal input mix and average transfer coefficients for coal power plants, taking into account the share of DeSOx installed.
- Emission of uranium and thorium radioactive isotopes were assumed proportional to the corresponding element emitted with particles; the other non-gaseous radioactive isotopes of the uranium and thorium decay chain were assumed proportional to the emitted U-238 or Th-232.
- The emission of gaseous radon and K-40 are taken from the literature.
IEA. 2009. Coal information, 2009 edition. Documentation for beyond 2020 files. International Energy Agency.
European Environment Agency (1991) CORINAIR Inventory; VOC"s Default Emission Factors
[This dataset is meant to replace the following datasets:
- electricity production, lignite, SK, 1993 - 2005]

## Included activities start
From the constructed lignite power plant ready to produce heat and electricity.

From reception of lignite and operating materials at power plant gate. Functional unit is "1MJ of lignite input to combustion".

## Included activities end
This activity ends with 1MJ of lignite in a combined heat and power power plant. .
Energy conversion for electricity production. Particle removal is included in this module. DeSOx is described in a different module; it is applied here according to the actual use in the country; SOx emission is the reduced one. There is no information about the use of DeNOx in the country. It is assumed that 25 % of the plants are river cooled, 75 % use cooling tower (average UCTE). The water treatment is described in separate modules. The disposal of non-recycled ashes is modelled separately.

## Geography
Country-specific data.

## Technology
POWER PLANT:
Lignite power plant input is a dataset which consists of a mix of 30% 100MW power plant and 70% 500MW power plant. The plants are used for basic load with 6000 hours of operation at full capacity per year. The plants are assumed to operate 200000 hours during its lifetime.

## Time period
The Annual Production Volume is valid for the year 2012.

## Parameters
- efficiency: 0.224 dimensionless; lognormal variance with pedigree 0.003325, pedigree (3,2,1,2,2)
  Literature value/calculated value. Net electrical efficiency based on the lower heating value (LHV).
  For all OECD countries, the IEA Electricity information 2014 provides data for the year 2012 on fuel input (TJ, Net calorific value NCV) and gross electricity production (GWh) as well as heat production (TJ) in tables 8 and 9 for each country for electricity only and Combined Heat and Power (CHP) plants each. Together with the information on own use (see parameter "losses"), the net electrical efficiency based on the NCV is calculated.
  For all non-OECD countries, data from the IEA Energy balances of non-OECD countries 2014 have been used. These tables do not always provide information on how much of the electricity has been produced in electricity only and in CHP plants, but often give the total value only.
  IEA. 2014. Electricity Information 2014. ISBN 978-92-64-21692-1. International Energy Agency (IEA), Paris Cedex (FR).
  IEA/OECD. 2014. Energy balances of non-OECD countries 2014. International Energy Agency (IEA), Paris Cedex (FR).
  output relative to input (requires additional specification)
- factor: input of MJ for the production of 1 kWh: 16.0714 MJ/kWh; name factor_MJ_kWh; = 1*3.6/efficiency; lognormal variance with pedigree 0.0532, pedigree (4,4,3,4,4)
  Calculated value. 3.6 MJ = 1kWh.
  nan
- fraction, cooling water, to air: 0.0251074 dimensionless; name fraction_CW_to_air; lognormal variance with pedigree 0.092025, pedigree (4,4,3,2,4)
  Calculated value based on literature value (Scown, 2011 & Floerke, 2009, Future changes of freshwater needs in the electricity production sector & Stiegel, 2008, Estimating Freshwater Needs to Meet Future Thermoelectric Generation Requirements) (Vionnet, S., Quantis Water Database - Technical Report, 2012).
  nan
- fraction, process water, to air: 0.15 dimensionless; name fraction_PW_to_air; lognormal variance with pedigree 0.092025, pedigree (4,4,3,2,4)
  Literature value. In case when no industry/process specific data are available, default evaporation fraction value is used. This value is 15% and is based on literature (Statistics Canada, 2007 & Shaffer, K.H., 2008, Consumptive water use in the Great Lakes Basin, USGS & Shiklomanov, 2003, World Water Resources at the Beginning of the 21st Century) and has been approved by an expert.
  nan
- fraction, water, completely softened, to air: 0.15 dimensionless; name fraction_WCS_to_air; = fraction_PW_to_air; lognormal variance with pedigree 0.092025, pedigree (4,4,3,2,4)
  Calculated value. See comment in the other parametres present in this dataset. Water, completely softened is considered to be always used as process water, thus process water fractions to air are applied to all water, completely softened input flows to calculate the amount of water consumed in the processes.
  nan
- fraction, water, decarbonised, to air: 0.0251074 dimensionless; name fraction_WDC_to_air; = fraction_CW_to_air; lognormal variance with pedigree 0.041425, pedigree (2,3,2,2,1)
  Calculated value. See comments in the other parametres present in this dataset. Decarbonised water is considered to be always used as cooling water, thus cooling water fractions to air are applied to all carbonised water input flows to calculate the amount of water consumed in the processes.
  nan
- gross electricity production: 2.124e9 kWh; name gross_electricity; lognormal variance with pedigree 0.001225, pedigree (2,1,1,2,1)
  Literature value/statistics. Taken from the IEA electricity information 2014.
  IEA. 2014. Electricity Information 2014. ISBN 978-92-64-21692-1. International Energy Agency (IEA), Paris Cedex (FR).
  nan
- losses from gross electricity production: 0.12 dimensionless; name losses_gross_net; lognormal variance with pedigree 0.003525, pedigree (3,2,2,2,2)
  Calculated value. Own use of electricity plants in this country in 2012. For the OECD countries, the OECD iLibrary provides gross and net electricity values for the specific sector \"Total Fuel Combustion\", from which the loss value is being calculated. This value is then applied to all fossil fuel datasets, as no data on a more detailed level were available.
  OECD. 2014. IEA Electricity Information Statistics: OECD - Electricity and heat generation. OECD iLibrary. Online database. DOI : 10.1787/elect-data-en
  nan
- once-through and cooling pond cooling systems as a fraction of all cooling syste: 0.73 dimensionless; name once_through_andCP_CS_fractio_from_allCS; lognormal variance with pedigree 0.092025, pedigree (4,4,3,2,4)
  Calculated as an average of data available for Europe (Floerke, 2008, Future changes of freshwater needs in the electricity production sector) and USA (NERL, 2011, Estimating freshwater needs to meet future thermoelectric generation requirements).
  nan
- recirculating cooling system as a fraction of all cooling systems: 0.27 dimensionless; name recirculating_CS_fraction_from_allCS; lognormal variance with pedigree 0.092025, pedigree (4,4,3,2,4)
  (same comment as for once-through and cooling pond cooling systems as a fraction of all coo)
- water consumption, electricity production from hard coal, once-through and cooli: 0.0014 m3/kWh; name WConsumption_EP_HC_once_through_andCP_CS; lognormal variance with pedigree 0.092025, pedigree (4,4,3,2,4)
  Estimated based on literature (Scown, 2011, Water Footprint of U.S. Transportation Fuels, SI). The amount of water consumed while burning lignite and peat is assumed to be the same as in case of coal.
  nan
- water consumption, electricity production from hard coal, recirculating CS: 0.0018 m3/kWh; name WConsumption_EP_HC_recirculatingCS; lognormal variance with pedigree 0.092025, pedigree (4,4,3,2,4)
  (same comment as for water consumption, electricity production from hard coal, once-through)
- water withdrawal, electricity production from hard coal, once-through and coolin: 0.0815 m3/kWh; name WWithdrawal_EP_HC_once_through_andCP_CS; lognormal variance with pedigree 0.092025, pedigree (4,4,3,2,4)
  Estimated based on literature (Scown, 2011, Water Footprint of U.S. Transportation Fuels, SI). The amount of water withdrawn while burning lignite and peat is assumed to be the same as in case of coal.
  nan
- water withdrawal, electricity production from hard coal, recirculating CS: 0.0021 m3/kWh; name WWithdrawal_EP_HC_recirculating_CS; lognormal variance with pedigree 0.092025, pedigree (4,4,3,2,4)
  (same comment as for water withdrawal, electricity production from hard coal, once-through )

## Reference product
- heat, district or industrial, other than natural gas: 1 MJ; By-product classification allocatable product; CPC 17300: Steam and hot water
  production volume 4.826e9 MJ
  properties: allocation factor 0.116273, carbon allocation 0 kg, carbon content 0, corresponding fuel use, propane, furnace >100kW 0 MJ, exergy 0.1842 MJ, heating value, net 1 MJ, price 0.0106 EUR2005, true value 0.000904037, true value relation 0.1842

## Inputs from technosphere
- NOx retained, by selective catalytic reduction: 0.000138307 kg; lognormal variance with pedigree 0.042, pedigree (3,1,3,1,1)
  properties: dry mass 1 kg, wet mass 1 kg
- SOx retained, in lignite flue gas desulfurisation: 0.000699093 kg; lognormal variance with pedigree 0.002, pedigree (3,1,3,1,1)
  properties: dry mass 1 kg, wet mass 1 kg
- chlorine, liquid: 7.26707e-6 kg; lognormal variance with pedigree 0.102025, pedigree (5,4,5,2,3)
  properties: dry mass 1 kg, wet mass 1 kg
- lignite: 0.071944 kg; lognormal variance with pedigree 0.0006, pedigree (2,1,3,1,1)
  properties: carbon content, fossil 0.655, dry mass 0.42 kg, heating value, net 8.8 MJ, water content 1.38095, wet mass 1 kg
- lignite ash: -0.0122087 kg; lognormal variance with pedigree 0.07, pedigree (5,1,1,1,1)
  properties: dry mass 1 kg, heating value, net 21.7 MJ, wet mass 1 kg
- lignite power plant: 4.52174e-13 unit; lognormal variance with pedigree 0.3626, pedigree (5,3,5,5,3)
- residue from cooling tower: -3.63354e-6 kg
  properties: carbon content, fossil 0.0544233, dry mass 0.7 kg, water content 0.428571, wet mass 1 kg
- water, completely softened: 0.00436024 kg; lognormal variance with pedigree 0.046025, pedigree (4,5,5,2,3)
  properties: wet mass 1 kg
- water, decarbonised: 0.109006 kg; lognormal variance with pedigree 0.046025, pedigree (4,5,5,2,3)
  properties: wet mass 1 kg

## Inputs from nature
- Water, cooling, unspecified natural origin [natural resource, in water]: 0.0608922 m3; lognormal variance with pedigree 0.092025, pedigree (4,4,5,2,4)

## Emissions to nature
- Antimony ion [air, non-urban air or from high stacks]: 4.16403e-10 kg; lognormal variance with pedigree 0.73, pedigree (5,1,3,1,1)
- Arsenic ion [air, non-urban air or from high stacks]: 1.56969e-9 kg; lognormal variance with pedigree 0.73, pedigree (5,1,3,1,1)
- Barium II [air, non-urban air or from high stacks]: 3.56087e-9 kg; lognormal variance with pedigree 0.73, pedigree (5,1,3,1,1)
- Benzene [air, non-urban air or from high stacks]: 1.57696e-7 kg; lognormal variance with pedigree 0.072025, pedigree (3,5,5,2,1)
- Benzo(a)pyrene [air, non-urban air or from high stacks]: 1.45341e-13 kg; lognormal variance with pedigree 0.072025, pedigree (3,5,5,2,1)
- Boron [air, non-urban air or from high stacks]: 2.18012e-6 kg; lognormal variance with pedigree 0.73, pedigree (5,1,3,1,1)
- Bromine [air, non-urban air or from high stacks]: 4.89074e-8 kg; lognormal variance with pedigree 0.2, pedigree (5,1,3,1,1)
- Butane [air, non-urban air or from high stacks]: 1.38074e-8 kg; lognormal variance with pedigree 0.072025, pedigree (3,5,5,2,1)
- Cadmium II [air, non-urban air or from high stacks]: 1.51882e-10 kg; lognormal variance with pedigree 0.73, pedigree (5,1,3,1,1)
- Carbon dioxide, fossil [air, non-urban air or from high stacks]: 0.0763043 kg; lognormal variance with pedigree 0.002, pedigree (3,1,3,1,1)
- Carbon monoxide, fossil [air, non-urban air or from high stacks]: 1.45341e-5 kg; lognormal variance with pedigree 0.666025, pedigree (3,4,5,2,1)
- Chromium III [air, non-urban air or from high stacks]: 4.44018e-10 kg; lognormal variance with pedigree 0.73, pedigree (5,1,3,1,1)
- Chromium VI [air, non-urban air or from high stacks]: 5.48664e-11 kg; lognormal variance with pedigree 0.48, pedigree (1,1,3,1,1)
- Cobalt II [air, non-urban air or from high stacks]: 5.3413e-10 kg; lognormal variance with pedigree 0.73, pedigree (5,1,3,1,1)
- Copper ion [air, non-urban air or from high stacks]: 4.91981e-10 kg; lognormal variance with pedigree 0.73, pedigree (5,1,3,1,1)
- Dinitrogen monoxide [air, non-urban air or from high stacks]: 1.35168e-6 kg; lognormal variance with pedigree 0.066025, pedigree (3,4,5,2,1)
- Dioxins, measured as 2,3,7,8-tetrachlorodibenzo-p-dioxin [air, non-urban air or from high stacks]: 5.08695e-15 kg; lognormal variance with pedigree 0.332025, pedigree (3,5,5,2,1)
- Ethane [air, non-urban air or from high stacks]: 2.9795e-8 kg; lognormal variance with pedigree 0.072025, pedigree (3,5,5,2,1)
- Formaldehyde [air, non-urban air or from high stacks]: 4.2149e-8 kg; lognormal variance with pedigree 0.072025, pedigree (3,5,5,2,1)
- Hydrocarbons, aliphatic, alkanes, unspecified [air, non-urban air or from high stacks]: 1.59149e-7 kg; lognormal variance with pedigree 0.072025, pedigree (3,5,5,2,1)
- Hydrocarbons, aliphatic, unsaturated [air, non-urban air or from high stacks]: 1.56969e-7 kg; lognormal variance with pedigree 0.072025, pedigree (3,5,5,2,1)
- Hydrochloric acid [air, non-urban air or from high stacks]: 2.81236e-6 kg; lognormal variance with pedigree 0.2, pedigree (5,1,3,1,1)
- Hydrogen fluoride [air, non-urban air or from high stacks]: 1.05373e-6 kg; lognormal variance with pedigree 0.2, pedigree (5,1,3,1,1)
- Iodine [air, non-urban air or from high stacks]: 3.84428e-8 kg; lognormal variance with pedigree 0.2, pedigree (5,1,3,1,1)
- Lead II [air, non-urban air or from high stacks]: 1.06826e-9 kg; lognormal variance with pedigree 0.73, pedigree (5,1,3,1,1)
- Lead-210 [air, non-urban air or from high stacks]: 2.43447e-6 kBq; lognormal variance with pedigree 0.38, pedigree (5,1,3,1,1)
- Manganese II [air, non-urban air or from high stacks]: 5.20323e-10 kg; lognormal variance with pedigree 0.73, pedigree (5,1,3,1,1)
- Mercury II [air, non-urban air or from high stacks]: 2.26006e-9 kg; lognormal variance with pedigree 0.73, pedigree (5,1,3,1,1)
- Methane, fossil [air, non-urban air or from high stacks]: 7.26707e-7 kg; lognormal variance with pedigree 0.066025, pedigree (3,4,5,2,1)
- Molybdenum VI [air, non-urban air or from high stacks]: 4.98521e-10 kg; lognormal variance with pedigree 0.73, pedigree (5,1,3,1,1)
- Nickel II [air, non-urban air or from high stacks]: 1.7659e-9 kg; lognormal variance with pedigree 0.73, pedigree (5,1,3,1,1)
- Nitrogen oxides [air, non-urban air or from high stacks]: 0.000147522 kg; lognormal variance with pedigree 0.042, pedigree (3,1,3,1,1)
- PAH, polycyclic aromatic hydrocarbons [air, non-urban air or from high stacks]: 7.26707e-10 kg; lognormal variance with pedigree 0.332025, pedigree (3,5,5,2,1)
- Particulate Matter, < 2.5 um [air, non-urban air or from high stacks]: 7.25254e-5 kg; lognormal variance with pedigree 0.38, pedigree (5,1,3,1,1)
- Particulate Matter, > 10 um [air, non-urban air or from high stacks]: 7.92111e-6 kg; lognormal variance with pedigree 0.12, pedigree (5,1,3,1,1)
- Particulate Matter, > 2.5 um and < 10um [air, non-urban air or from high stacks]: 8.50248e-8 kg; lognormal variance with pedigree 0.2, pedigree (5,1,3,1,1)
- Pentane [air, non-urban air or from high stacks]: 1.06826e-7 kg; lognormal variance with pedigree 0.072025, pedigree (3,5,5,2,1)
- Polonium-210 [air, non-urban air or from high stacks]: 4.45472e-6 kBq; lognormal variance with pedigree 0.38, pedigree (5,1,3,1,1)
- Potassium-40 [air, non-urban air or from high stacks]: 6.63484e-7 kBq; lognormal variance with pedigree 0.38, pedigree (5,1,3,1,1)
- Propane [air, non-urban air or from high stacks]: 2.54348e-8 kg; lognormal variance with pedigree 0.072025, pedigree (3,5,5,2,1)
- Propene [air, non-urban air or from high stacks]: 1.16273e-8 kg; lognormal variance with pedigree 0.072025, pedigree (3,5,5,2,1)
- Radium-226 [air, non-urban air or from high stacks]: 6.28602e-7 kBq; lognormal variance with pedigree 0.38, pedigree (5,1,3,1,1)
- Radium-228 [air, non-urban air or from high stacks]: 2.97223e-7 kBq; lognormal variance with pedigree 0.38, pedigree (5,1,3,1,1)
- Radon-220 [air, non-urban air or from high stacks]: 8.57515e-5 kBq; lognormal variance with pedigree 0.38, pedigree (5,1,3,1,1)
- Radon-222 [air, non-urban air or from high stacks]: 0.000151882 kBq; lognormal variance with pedigree 0.38, pedigree (5,1,3,1,1)
- Selenium IV [air, non-urban air or from high stacks]: 9.22919e-9 kg; lognormal variance with pedigree 0.73, pedigree (5,1,3,1,1)
- Strontium [air, non-urban air or from high stacks]: 1.92577e-9 kg; lognormal variance with pedigree 0.73, pedigree (5,1,3,1,1)
- Sulfur dioxide [air, non-urban air or from high stacks]: 0.000879316 kg; lognormal variance with pedigree 0.002, pedigree (3,1,3,1,1)
- Thorium-228 [air, non-urban air or from high stacks]: 1.59876e-7 kBq; lognormal variance with pedigree 0.38, pedigree (5,1,3,1,1)
- Thorium-232 [air, non-urban air or from high stacks]: 2.51441e-7 kBq; lognormal variance with pedigree 0.38, pedigree (5,1,3,1,1)
- Toluene [air, non-urban air or from high stacks]: 7.92111e-8 kg; lognormal variance with pedigree 0.072025, pedigree (3,5,5,2,1)
- Uranium-238 [air, non-urban air or from high stacks]: 5.23956e-7 kBq; lognormal variance with pedigree 0.38, pedigree (5,1,3,1,1)
- Vanadium V [air, non-urban air or from high stacks]: 1.48248e-9 kg; lognormal variance with pedigree 0.73, pedigree (5,1,3,1,1)
- Water [air, unspecified]: 0.00153223 m3; lognormal variance with pedigree 0.092025, pedigree (4,4,5,2,4)
- Xylene [air, non-urban air or from high stacks]: 6.70024e-7 kg; lognormal variance with pedigree 0.072025, pedigree (3,5,5,2,1)
- Zinc II [air, non-urban air or from high stacks]: 5.10149e-9 kg; lognormal variance with pedigree 0.73, pedigree (5,1,3,1,1)
- Water [water, unspecified]: 0.0594733 m3; lognormal variance with pedigree 0.092025, pedigree (4,4,5,2,4)

## Sampling procedure
literature and statistics

## Extrapolations
Data from 1993 have been updated for year 2000. No changes were made for this dataset, but uncertainty was adjusted.

## Review by Carl Vadenbo 2015-07-02
The update of the whole electricity sector for the ecoinvent v3.2 database consist of hundreds of datasets. All these datasets have passed through a streamlined review processes where the underlying modelling of production volumes, technology shares and efficiencies was reviewed in detail prior to the datasets being submitted to the database.
