# NCA oxide production, for Li-ion battery

Dataset: EcoSpold 2, unit process
Geography: RoW
Time period: 2016-01-01 to 2022-12-31
Technology level: current
Classification: ISIC rev.4 ecoinvent: 2011:Manufacture of basic chemicals
Synonyms: nickel-cobalt-aluminium oxide; nickel cobalt aluminium oxide
Scenario: Business-as-Usual
System model: Allocation, cut-off by classification
Generated by: Eleonora Crenna
Published in: Benavides, P.T. 2016
Database: ecoinvent
isCopyrightProtected: true
accessRestrictedTo: 1

## General comment
This dataset represents the production of 1 kg nickel cobalt aluminium (NCA) oxide, used as active material in the production NCA cathodes in Li-ion batteries. This dataset is a copy of the corresponding regional dataset. Production volume was adjusted.

## Included activities start
The activity starts when NCA hydroxide and other chemicals enter the process at the factory.

## Included activities end
The activity ends with the production at factory gate of NCA oxide via calcination process.

## Geography
The values in this dataset come from large-scale industrial production companies located in China and are assumed to be representative of the production of NMC111 oxide in China.

## Technology
NCA oxide is produced through a multi-step calcination process. NCA hydroxide and lithium hydroxide are mixed and heated in the calcination kiln over two or three rounds of mixing and calcination. Oxygen is also add to the mixture.The resulting material is crushed, sieved and demagnetized to obtain NCA oxide. The production process is completely automated and almost all electricity consumption is attributed to the calcination kiln. The facility can achieve an overall material efficiency of approximately100%.
The general reaction is the following:
NCA(OH)2 + LiOH + 0.25 O2 --> Li-NCA-O2 + 2.5 H20
Reference:
Dai, Q., Kelly, J. C., Dunn, J., & Benavides, P. (2018). Update of Bill-of-Materials and Cathode Materials Production for Lithium-Ion Batteries in the GREET Model. 2018. Argonne National Laboratory.

## Time period
The time period is from 2016 (year of the publication of data) and 2020 (year of the dataset)

## Reference product
- NCA oxide: 1 kg; By-product classification allocatable product; CPC 34220: Zinc oxide; zinc peroxide; chromium oxides and hydroxides; manganese oxides; iron oxides and hydroxides; earth[…]
  production volume 4.22029e7 kg
  properties: carbon allocation 0 kg, carbon content 0, carbon content, fossil 0, carbon content, non-fossil 0, dry mass 1 kg, price 22.41 EUR2005, water content 0, water in wet mass 0 kg, wet mass 1 kg

## Inputs from technosphere
- NCA hydroxide: 0.95 kg; lognormal variance with pedigree 0.0038, pedigree (2,3,2,5,1)
  properties: dry mass 1 kg, heating value, net 2.66 MJ, wet mass 1 kg
- chemical factory, organics: 7.41e-10 unit; lognormal variance with pedigree 0.3052, pedigree (3,3,2,5,2)
- electricity, medium voltage: 0.00635747, 0.002767, 0.369674, 0.572854, 0.0060184, 0.00921203, 0.423358, 0.00351332, 1.38435, 0.0976442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 kWh (46 suppliers, which the file names only by identifier); sum of these 7.26 kWh; lognormal variance with pedigree 0.0038, pedigree (2,3,2,5,1)
- lithium hydroxide: 0.25 kg; lognormal variance with pedigree 0.0038, pedigree (2,3,2,5,1)
  properties: dry mass 1 kg, heating value, net 5.06 MJ, wet mass 1 kg

## Inputs from nature
- Oxygen [natural resource, in air]: 0.04 kg; lognormal variance with pedigree 0.0038, pedigree (2,3,2,5,1)

## Emissions to nature
- Water [air, non-urban air or from high stacks]: 0.00024 m3; lognormal variance with pedigree 0.0846, pedigree (3,3,2,5,4)

## Sampling procedure
The data about the production process of NCA oxide are retrieved from the literature (see published source field). The value of water emissions is calculated to obtain mass balance; the value of infrastructure is calculated as representative of the production site.

## Extrapolations
The dataset is extrapolated from CN data; the uncertainty has been adjusted accordingly.
