# concrete production, 20MPa, with cement, Portland

Dataset: EcoSpold 2, unit process
Geography: RoW
Time period: 2006-01-01 to 2022-12-31
Technology level: current
Classification: ISIC rev.4 ecoinvent: 2395:Manufacture of articles of concrete, cement and plaster
Synonyms: ready mixed concrete; ready-mix concrete
Scenario: Business-as-Usual
System model: Allocation, cut-off by classification
Generated by: Daniela Baumann
Published in: Marceau 2006
Database: ecoinvent
isCopyrightProtected: true
accessRestrictedTo: 1

## General comment
This dataset contains the production of 20 MPa ready-mix concrete used for building construction with Portland cement. Density: 2'335 kg/m³. Ingredients (for 1 m³): Cement 204 kg, Water 160 kg, Gravel 1009 kg, Sand 925 kg, Fly ash 36.38 kg, Admixtures (air-entrainers and superplastisizers) 1,2kg. 20 MPa concrete is intended for residential use, such as footings for walls, columns, fireplaces, chimneys, foundations, walls, grade beams, piers, not exposed to freeze-thaw. (following the Canadian CSA specs - http://www.rmcao.org/sites/default/files/CSA%20Quickspec%202012.pdf) Generic concrete mixes (cement, SCM, aggregate, water) provided by the CPCA (Athena (2005):Cement and Structural Concrete: LCI Update 2005; Table 10.1). Admixtures included in the mixes, as provided by the CPCI (Athena and Morrison Hershfield (2012): Life Cycle Assessment of Precast Concrete Commercial Buildings Cradle-to-Grave; Table 5). The average water consumption (not including batch water) is 65 L/m³ of ready mixed concrete. The average amount of water disposed is 35 L/m³. Water not discarded is recycled back into the process or into other products, and therefore not accounted for in this dataset.

## Included activities start
From reception of raw materials at the ready-mix plant gate.

## Included activities end
This activity ends before the delivery of concrete at the construction site. The dataset includes the whole manufacturing processes to produce ready-mixed concrete, internal processes (material handling and mixing) and infrastructure. The dataset does not include: - the transport of concrete in a mixing truck. The combustion of 5.74 litres of diesel should be used to take into account the average transportation of 1m³ of concrete.

## Geography
North American data. For some exchanges RER-modules have been used as proxy. Data quality indicators adjusted accordingly.

## Technology
Typical technology for average North American production. Data quality indicators adjusted accordingly.

## Parameters
- fraction: 0 dimensionless
- fraction of 20 MPa concrete to overall concrete production: 0.2 dimensionless; name fraction_20MPa_concrete; lognormal variance with pedigree 0.0014, pedigree (2,2,1,3,1)
  For Annual production volume purpose. Extrapolated value. In Quebec, Canada, 20MPa concrete represents 20% of the overall ready-mix concrete production. Source; Personal communication, ABQ (Association Béton Québec), October 2013.
- fraction of 25 MPa concrete to overall concrete production: 0 dimensionless
- fraction, process water, to air: 0.15 dimensionless; name fraction_PW_to_air; lognormal variance with pedigree 0.0226, pedigree (4,4,3,5,3)
  Rough estimation to represent water evaporation of process water. Source: 2007, Kellenberger D et al. (ecoinvent "Concrete production, normal" dataset)
- fraction_01: 0.8 dimensionless; name fraction_ethylene_oxide; lognormal variance with pedigree 0.0427, pedigree (3,1,1,3,4)
  Literature value. Superplastisizer assumed to be 80% ehtlyne oxide. 20 MPa mix admixtures. Source: Athena and morrison Hershfield (2012): Life Cycle Assessment of Precast Concrete Commerical Buildings Cradle-to-Grave
- fraction_02: 0.2 dimensionless; name fraction_acetic_acid; lognormal variance with pedigree 0.0427, pedigree (3,1,1,3,4)
  Literature value. Superplastisizer assumed to be 20% acetic acid. 20 MPa mix admixtures. Source: Athena and morrison Hershfield (2012): Life Cycle Assessment of Precast Concrete Commerical Buildings Cradle-to-Grave
- north america production volume in cubic meter: 1.36778e8 m3; name PV_ready_mix_RNA; = 270E09/2350/0.84; lognormal variance with pedigree 0.0033, pedigree (3,2,1,1,2)
  Based on U.S. Ready-Mix concrete production in 2008 (270 Mt, assuming an average density of 2350 kg/m³), Literature value from: Sakai, K and Noguchi, T. (2012) The Sustainable Use of Concrete. CRC Press, 188 pages. (p.27). To esimate the North American production volume, a GDP ratio was used. where US accounts for 84 % of North America (including Canada and Mexico). Based on GDP 2012 of United Nations US GDP 2012: 1,624 E07 $ Canada GDP 2012: 1,821 E06 $ GDP Mexico 2012 : 1,184 E06 $
- quebec production volume in cubic meter: 4.7e6 m3; name PV_ready_mix_Qc; lognormal variance with pedigree 0.0026, pedigree (3,1,1,1,1)
  Estimated value, from Association Béton Québec (2008). Source: http://www.betonabq.org/images/fichiers_documents/rapport%20annuel%202008.pdf
- superplastisizer: 0.109 kg; lognormal variance with pedigree 0.0029, pedigree (3,2,2,2,1)
  Source: Athena and morrison Hershfield (2012): Life Cycle Assessment of Precast Concrete Commerical Buildings Cradle-to-Grave

## Reference product
- concrete, 20MPa: 1 m3; By-product classification allocatable product; CPC 37510: Non-refractory mortars and concretes
  production volume 5.04477e8 m3
  properties: carbon allocation 2.174e-48 kg, carbon content 1e-51, carbon content, fossil 1e-51, cement content 204 kg, dry mass 2174 kg, fly ash content 36 kg, gravel content 1009 kg, price 185 EUR2005, sand content 925 kg, water content 0.0735971, water in wet mass 160 kg, wet mass 2334 kg

## Inputs from technosphere
- acetic acid, without water, in 98% solution state: 0.0218 kg; lognormal variance with pedigree 0.002, pedigree (1,1,1,5,1)
  properties: carbon content, fossil 0.400016, dry mass 1 kg, heating value, net 14.6 MJ, wet mass 1 kg
- alkylbenzene sulfonate, linear, petrochemical: 1.1 kg; lognormal variance with pedigree 0.0449, pedigree (3,2,2,5,4)
  properties: carbon content, fossil 0.407018, dry mass 1 kg, heating value, net 28.88 MJ, wet mass 1 kg
- cement, Portland: 7.09027, 10.3698, 0.028139, 0.381518, 187.532, 0.253329, 0.486614 kg (7 suppliers, which the file names only by identifier); sum of these 206.141 kg; lognormal variance with pedigree 0.002, pedigree (1,1,1,5,1)
  properties: dry mass 1 kg, wet mass 1 kg
- chemical, organic: 0.0213046 kg; lognormal variance with pedigree 0.0047, pedigree (3,2,1,5,1)
  properties: carbon content, fossil 0.628, dry mass 1 kg, heating value, net 19.03 MJ, wet mass 1 kg
- concrete mixing factory: 4.57e-7 unit; lognormal variance with pedigree 0.3228, pedigree (2,1,2,5,1)
- diesel, burned in building machine: 15.6427 MJ; lognormal variance with pedigree 0.002, pedigree (1,1,1,5,1)
  properties: density 0.84 kg/l, fuel input in physical units, m3 0.0004351 m3, heating value, net 1 MJ
- electricity, medium voltage: 0.203307, 0.664798, 0.298922, 0.150018, 2.74263, 0.0454211, 0.00890189 kWh (7 suppliers, which the file names only by identifier); sum of these 4.114 kWh; lognormal variance with pedigree 0.02, pedigree (4,1,1,5,1)
- ethylene oxide: 0.0288277, 0.0583723 kg (2 suppliers, which the file names only by identifier); sum of these 0.0872 kg; lognormal variance with pedigree 0.002, pedigree (1,1,1,5,1)
  properties: carbon content, fossil 0.545455, dry mass 1 kg, heating value, net 27.53 MJ, wet mass 1 kg
- gravel, round: 0.265094, 1019.33 kg (2 suppliers, which the file names only by identifier); sum of these 1019.59 kg; lognormal variance with pedigree 0.002, pedigree (1,1,1,5,1)
  properties: dry mass 1 kg, wet mass 1 kg
- heat, district or industrial, natural gas: 7.76297, 2.8693 MJ (2 suppliers, which the file names only by identifier); sum of these 10.6323 MJ; lognormal variance with pedigree 0.002, pedigree (1,1,1,5,1)
  properties: fuel input in physical units, m3 0.2929 m3, heating value, net 1 MJ
- lubricating oil: 0.0098294, 0.0020706 kg (2 suppliers, which the file names only by identifier); sum of these 0.0119 kg; lognormal variance with pedigree 0.0128, pedigree (2,1,2,5,1)
  properties: carbon content, fossil 0.75, dry mass 1 kg, heating value, net 40.2 MJ, wet mass 1 kg
- sand: 14.1423, 920.325, 0.0734204, 0.16933 kg (4 suppliers, which the file names only by identifier); sum of these 934.71 kg; lognormal variance with pedigree 0.002, pedigree (1,1,1,5,1)
  properties: dry mass 1 kg, wet mass 1 kg
- steel, low-alloyed, hot rolled: 0.0238 kg; lognormal variance with pedigree 0.0128, pedigree (2,1,2,5,1)
  properties: carbon content, fossil 0.005, dry mass 1 kg, wet mass 1 kg
- synthetic rubber: 0.00713 kg; lognormal variance with pedigree 0.0128, pedigree (2,1,2,5,1)
  properties: carbon content, fossil 0.871949, dry mass 1 kg, heating value, net 26.42 MJ, wet mass 1 kg
- tap water: 20.3296, 1.50436, 173.719, 4.05264, 0.806217, 0.52887 kg (6 suppliers, which the file names only by identifier); sum of these 200.941 kg; lognormal variance with pedigree 0.002, pedigree (1,1,1,5,1)
  properties: batch water 160 kg, carbon content, fossil 0.00178991, dry mass 0.000337476 kg, non-process water, net -40.9412 kg, water content 2962.17, wet mass 1 kg
- waste concrete: -1.67402, -22.8201, -0.0059187 kg (3 suppliers, which the file names only by identifier); sum of these -24.5 kg; lognormal variance with pedigree 0.0126, pedigree (2,1,1,5,1)
  properties: carbon content, fossil 1e-51, dry mass 0.931448 kg, water content 0.0735971, wet mass 1 kg
- wastewater from concrete production: -0.0346325, -0.000167479 m3 (2 suppliers, which the file names only by identifier); sum of these -0.0348 m3; lognormal variance with pedigree 0.0126, pedigree (2,1,1,5,1)
  properties: carbon content, fossil 0.027074, dry mass 0.449139 kg, water content 2225.48, wet mass 1000 kg

## Emissions to nature
- Water [air, unspecified]: 0.00614118 m3; lognormal variance with pedigree 0.002, pedigree (1,1,1,5,1)
- Chlorides, unspecified [water, unspecified]: 3.09e-9 kg; lognormal variance with pedigree 0.0032, pedigree (2,1,1,5,1)
- Copper ion [water, unspecified]: 1.55e-8 kg; lognormal variance with pedigree 0.0032, pedigree (2,1,1,5,1)
- Iron ion [water, unspecified]: 1.55e-8 kg; lognormal variance with pedigree 0.0032, pedigree (2,1,1,5,1)
- Oils, unspecified [water, unspecified]: 2.32e-7 kg; lognormal variance with pedigree 0.0032, pedigree (2,1,1,5,1)
- Suspended solids, unspecified [water, unspecified]: 4.64e-7 kg; lognormal variance with pedigree 0.0032, pedigree (2,1,1,5,1)

## Sampling procedure
Data on process inputs and water use are from Confidential Life Cycle Inventory Survey of Ready-Mix Concrete Plant (Marceau, VanGeem, and Ranchero 2006a). This survey was distributed to a sample of member-plants of the National Ready Mixed Concrete Association. The sample was chosen so that the plants in the sample are representative of climates of the conterminous United States and plant size in terms of production in cubic yards of ready mixed concrete. The sample consists of 47 plants.

## Extrapolations
This dataset is a copy of the corresponding North America without Quebec dataset.
