# naphthalene sulfonic acid production

Dataset: EcoSpold 2, unit process
Geography: RoW
Time period: 2010-01-01 to 2022-12-31
Technology level: current
Classification: ISIC rev.4 ecoinvent: 2029:Manufacture of other chemical products n.e.c.
Synonyms: 2-Naphthalene Sulfonic Acid; Beta-Naphthalenesulfonic acid; Beta-Naphthylsulfonic acid; 120-18-3; Naphthalene-2-sulfonic acid; 2-NAPHTHALENESULFONIC ACID
Scenario: Business-as-Usual
System model: Allocation, cut-off by classification
Share of production covered: 100 %
Generated by: Jürgen Sutter
Database: ecoinvent
isCopyrightProtected: true
accessRestrictedTo: 1

## General comment
This dataset represents the production of 1 kg of naphthalene sulfonic acid obtained by sulfonation of naphthalene. Naphthalene sulfonic acid is used as an intermediate compound for the production of other chemical products which are used in various applications, such as azo dyes, concrete superplasticizers, tanning agents, dispersants and insecticides (Collin et al. 2003).
In this dataset the raw materials are modelled with stoechiometric calculations. The emissions are estimated, and the energy and water consumptions are approximated based on data from a large chemical factory (Gendorf 2016).
References:
Collin, G., Höke, H. and Greim, H. 2003. Naphthalene and Hydronaphthalenes. Ullmann's Encyclopedia of Industrial Chemistry.
Gendorf (2016) Umwelterklärung 2015, Werk Gendorf Industriepark, www.gendorf.de.

## Included activities start
The activity starts when the raw materials enter the process.

## Included activities end
This activity ends with the production of naphthalene sulfonic acid. The dataset includes the consumption of raw materials, energy uses, infrastructure use, and emissions.

## Geography
The data used has no specific geographical origin as it is based on stoechiometric calculations and estimations. Some values are based on data from a large chemical factory located in Germany. These are assumed to be valid for this geography.

## Technology
Naphthalene-1-sulfonic acid (C10H8O3S; CAS 85-47-2, naphthalene-α-sulfonic acid) crystallizes from aqueous solutions as the dihydrate; dehydration (P2O5, 1.33 kPa) gives the anhydrous acid. Naphthalene-1-sulfonic acid is produced by adding naphthalene to 96 % sulfuric acid at 20 °C and slowly raising the temperature to 70 °C. After 3 h at 70 – 75 °C the reaction mass is poured into water and limed out. A technical-grade product is obtained by evaporation and a purer product by precipitating the aniline salt.
An alternative sulfonation process uses sulfur trioxide in a solvent such as tetrachloroethane.
Naphthalene-1-sulfonic acid is further sulfonated or nitrated without isolation. At lower temperature (35 °C), sulfuric acid with oleum yields the 1,5-disulfonic acid, whereas at higher temperature (100 °C) the 1,6-disulfonic acid is predominantly obtained. Nitration gives mainly the 5-nitro and 8-nitro derivatives (see Section Production and Properties). Production of 1-naphthol by caustic fusion (hydroxylation) has long since been superseded by alternatives for reasons of product quality (Section 1-Naphthol). A continuous process for the production of hexamethyldisilazane consisting of the concurrent actions of continuously introducing predetermined quantities per time unit of trimethylchlorosilane and gaseous ammonia to form a mixture of hexamethyldisilazane and ammonium chloride in a first reactor while simultaneously subjecting said mixture to continuous high shear agitation, for a time period related to the volume of the reactor and the quantities of trimethylchlorosilane and ammonia introduced, to form a slurry; and simultaneously separating the ammonium chloride from said slurry to provide a solution principally comprising hexamethyldisilazane, while continuing to introduce a continuous flow of further quantities of trimethylchlorosilane and ammonia as the hexamethyldisilazane is removed.
References:
Frischknecht R., Jungbluth N., Althaus H.-J., Doka G., Dones R., Heck T., Hellweg S., Hischier R., Nemecek T., Rebitzer G. and Spielmann M. (2007) Overview and Methodology. Final report ecoinvent v2.0 No. 1. Swiss Centre for Life Cycle Inventories, Dübendorf, CH, retrieved from: www.ecoinvent.org.
Gerald Booth: Naphthalene Derivatives. Published online: 2000. In: Ullmann's Encyclopedia of Industrial Chemistry, Seventh Edition, 2004 Electronic Release (ed. Fiedler E., Grossmann G., Kersebohm D., Weiss G. and Witte C.). 7 th Electronic Release Edition. Wiley InterScience, New York, Online-Version under: DOI: 10.1002/14356007.a17_009

## Time period
Time of publications. Some values are based on data published by the Gendorf factory that were collected between 2011 and 2015. The time period has been adjusted accordingly. For more details, see the comments of the exchanges.

## Reference product
- naphthalene sulfonic acid: 1 kg; By-product classification allocatable product; CPC 34150: Amine-function compounds; oxygen-function amino-compounds, except lysine and its esters and salts thereof and […]
  production volume 6.7e6 kg
  properties: carbon allocation 0.576793 kg, carbon content 0.576793, carbon content, fossil 0.576793, carbon content, non-fossil 0, dry mass 1 kg, heating value, net 22.13 MJ, price 0.595178 EUR2005, water content 0, water in wet mass 0 kg, wet mass 1 kg

## Inputs from technosphere
- chemical factory, organics: 4e-10 unit; lognormal variance with pedigree 0.3098, pedigree (2,3,2,4,3)
- electricity, medium voltage: 0.0295802, 0.0148452, 0.271401, 0.0044947, 0.000880897, 0.0947985 kWh (6 suppliers, which the file names only by identifier); sum of these 0.416 kWh; lognormal variance with pedigree 0.0104, pedigree (2,3,2,4,3)
- heat, district or industrial, natural gas: 2.11524, 0.0347588 MJ (2 suppliers, which the file names only by identifier); sum of these 2.15 MJ; lognormal variance with pedigree 0.0104, pedigree (2,3,2,4,3)
  properties: heating value, net 1 MJ
- heat, from steam, in chemical industry: 0.2 MJ; lognormal variance with pedigree 0.0104, pedigree (2,3,2,4,3)
  properties: heating value, net 1 MJ
- nitrogen, liquid: 0.019 kg; lognormal variance with pedigree 0.0104, pedigree (2,3,2,4,3)
  properties: dry mass 1 kg, wet mass 1 kg
- sodium hydroxide, without water, in 50% solution state: 0.010121 kg; lognormal variance with pedigree 0.1786, pedigree (4,5,5,5,5)
  properties: dry mass 1 kg, heating value, net 3.03 MJ, wet mass 1 kg
- sulfuric acid: 0.49595 kg; lognormal variance with pedigree 0.1786, pedigree (4,5,5,5,5)
  properties: dry mass 1 kg, wet mass 1 kg
- tap water: 0.00203022, 0.000150233, 0.0232328, 0.000404717, 4.8717e-5, 8.05128e-5, 5.28156e-5 kg (7 suppliers, which the file names only by identifier); sum of these 0.026 kg; lognormal variance with pedigree 0.0104, pedigree (2,3,2,4,3)
  properties: carbon content, fossil 0.00178991, dry mass 0.000337476 kg, water content 2962.17, wet mass 1 kg
- wastewater, average: -2.69042e-6, -9.57892e-9 m3 (2 suppliers, which the file names only by identifier); sum of these -2.7e-6 m3; lognormal variance with pedigree 0.0104, pedigree (2,3,1,4,3)
  properties: carbon content, non-fossil 0.194039, dry mass 0.346837 kg, water content 2882.2, wet mass 1000 kg
- wood preservative, creosote: 0.64777 kg; lognormal variance with pedigree 0.0255, pedigree (4,5,2,1,1)
  properties: carbon content, fossil 0.940828, dry mass 1 kg, heating value, net 28.51 MJ, wet mass 1 kg

## Inputs from nature
- Water, cooling, unspecified natural origin [natural resource, in water]: 0.0164 m3; lognormal variance with pedigree 0.0104, pedigree (2,3,2,4,3)
- Water, river [natural resource, in water]: 0.00086 m3; lognormal variance with pedigree 0.0104, pedigree (2,3,2,4,3)
- Water, well, in ground [natural resource, in water]: 0.00083 m3; lognormal variance with pedigree 0.0104, pedigree (2,3,2,4,3)

## Emissions to nature
- Carbon dioxide, fossil [air, urban air close to ground]: 0.11134 kg; lognormal variance with pedigree 0.1786, pedigree (4,5,5,5,5)
- Nitrogen [air, unspecified]: 0.019 kg; lognormal variance with pedigree 0.0104, pedigree (2,3,2,4,3)
- Sulfur dioxide [air, urban air close to ground]: 0.00064777 kg; lognormal variance with pedigree 0.1786, pedigree (4,5,5,5,5)
- Water [air, unspecified]: 0.0014 m3; lognormal variance with pedigree 0.0104, pedigree (2,3,2,4,3)
- Sodium I [water, surface water]: 0.0058198 kg; lognormal variance with pedigree 0.6642, pedigree (4,5,5,5,5)
- Sulfate [water, surface water]: 0.024291 kg; lognormal variance with pedigree 0.1786, pedigree (4,5,5,5,5)
- Water [water, unspecified]: 0.0167 m3; lognormal variance with pedigree 0.0104, pedigree (2,3,2,4,3)

## Sampling procedure
Literature data. Some values are calculated based on data from a large chemical factory located in Germany. For more details, see the comments of the exchanges.

## Review by Emilia Moreno Ruiz 2017-09-01
This dataset was additionally reviewed in a separate review process by Eric Johnson of Atlantic Consulting as well as Emilia Moreno Ruiz and Gregor Wernet of ecoinvent.
