# urea ammonium nitrate production

Dataset: EcoSpold 2, unit process
Geography: RoW
Time period: 2011-01-01 to 2022-12-31
Technology level: current
Classification: ISIC rev.4 ecoinvent: 2012:Manufacture of fertilizers and nitrogen compounds
Synonyms: UAN, UAN 30
Scenario: Business-as-Usual
System model: Allocation, cut-off by classification
Generated by: Anna Kounina
Database: ecoinvent
isCopyrightProtected: true
accessRestrictedTo: 1

## General comment
This dataset is a weighted average from the respective regional datasets.
This dataset represents the production of 1 kg of urea ammonium nitrate, with 30% N. Urea ammonium nitrate (UAN) is a liquid fertiliser with 28-32 % nitrogen (N) content. Urea ammonium nitrate solutions are produced through mixing and cooling of concentrated urea and ammonium nitrate solutions. Both continuous and batch processes exist. The amount of CO2 recovered from the ammonia synthesis and used in urea production, will be inevitably and completely released back to the atmosphere after application of UAN to the soil.
The main data sources for this dataset are Fertilizers Europe (2014, 2016). Additional data sources are listed as follows.
References:
Fertilizers Europe (2000): Best Available Techniques for Pollution Prevention and Control in the European Fertilizer Industry. Booklet No. 1 of 8: Production of Ammonia. Fertilizers Europe, Brussels.
Kongshaug G. (1998): Energy Consumption and Greenhouse Gas Emissions in Fertilizer Production. IFA 20th July 1998
Davies J., Haglund C. (1999): Life Cycle Inventory of Fertiliser Production. SIK-Report No 654 1999. Chalmers University of Technology, Sweden.
Fertilizers Europe (2014): Average Emissions Year 2011. Fertilizers Europe Environmental report (internal).
Fertilizers Europe (2000): Best Available Techniques for Pollution Prevention and Control in the European Fertilizer Industry. Booklet No. 5 of 8: Production of urea and urea ammonium nitrate. Fertilizers Europe, Brussels.
Fertilizers Europe (2016): Carbon Footprint Calculator for Fertilizer Production. Specification. Version 2.1
Fertilizers Europe (2016): Average Emissions Year 2014. Fertilizers Europe Environmental report (internal). Used for updated energy and GHG emission in Carbon Footprint Calculator

## Included activities start
The activity includes all the raw and processed materials necessary to produce this product. Urea, ammonium nitrate, electricity and heat (as fuel oil) are included. Direct emissions of carbon dioxide to air are included.

## Included activities end
The activity ends with the final product being ready for transportation at the production site.

## Geography
This dataset is a weighted average built from the following geographies: RNA, RER, CN.

## Technology
Average techlogy from the regional counterparts as given in the geography comment.

## Time period
Primary data were collected on fertiliser production for the year 2011. These data were based on annual average data for the year 2011.

## Reference product
- urea ammonium nitrate mix: 1 kg; By-product classification allocatable product; CPC 34619: Other nitrogenous fertilizers and mixtures, n.e.c.
  production volume 1.20656e10 kg
  properties: carbon allocation 0.0659982 kg, carbon content 0.0879977, carbon content, fossil 0.0879977, carbon content, non-fossil 0, dry mass 0.75 kg, hydrogen content 0.095042, nitrogen content 0.401231, oxygen content 0.749063, price 0.555669 EUR2005, water content 0.333333, water in wet mass 0.25 kg, wet mass 1 kg

## Inputs from technosphere
- ammonium nitrate: 0.469 kg; lognormal variance with pedigree 0.0086, pedigree (3,4,5,5,1)
  properties: dry mass 1 kg, hydrogen content 0.0503678, nitrogen content 0.349979, oxygen content 0.599654, wet mass 1 kg
- chemical factory, organics: 4.002e-10 unit; lognormal variance with pedigree 0.306, pedigree (3,4,5,1,1)
- electricity, low voltage: 6.3475e-5, 3.98582e-5, 1.29349e-5, 1.79929e-5, 5.80505e-5, 0.00195163, 0.000928299, 9.43036e-6, 5.09987e-5, 0.000345813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 kWh (43 suppliers, which the file names only by identifier); sum of these 0.0277778 kWh; lognormal variance with pedigree 0.0086, pedigree (3,4,5,5,1)
- heavy fuel oil, burned in refinery furnace: 0.00571239 MJ; lognormal variance with pedigree 0.0086, pedigree (3,4,5,5,1)
  properties: carbon content, fossil 0.849, dry mass 0.0242718 kg, wet mass 0.0242718 kg
- tap water: 0.0160375, 0.00118675, 0.183525, 0.00319702, 0.000636005, 0.000417212 kg (6 suppliers, which the file names only by identifier); sum of these 0.205 kg; lognormal variance with pedigree 0.0086, pedigree (3,4,5,5,1)
  properties: carbon content, fossil 0.00178991, dry mass 0.000337476 kg, water content 2962.17, wet mass 1 kg
- urea: 0.326 kg; lognormal variance with pedigree 0.0086, pedigree (3,4,5,5,1)
  properties: carbon content, fossil 0.199995, dry mass 1 kg, hydrogen content 0.0671317, nitrogen content 0.466462, oxygen content 0.266412, wet mass 1 kg

## Extrapolations
This dataset was built as a weighted average of regional datasets of the same activityName. Weights are based on production volumes.
RNA: production volume = 1.61e+10 kg/year, weight = 0.7345
RER: production volume = 3.16e+09 kg/year, weight = 0.144
CN: production volume = 2.67e+09 kg/year, weight = 0.1215
