# mango production

Dataset: EcoSpold 2, unit process
Geography: RoW
Time period: 2010-01-01 to 2022-12-31
Technology level: current
Classification: ISIC rev.4 ecoinvent: 0122:Growing of tropical and subtropical fruits
Synonyms: mango cultivation; mango production; mango orchard
Scenario: Business-as-Usual
System model: Allocation, cut-off by classification
Share of production covered: 100 %
Generated by: Jade Müller Carneiro
Published in: Folegatti-Matsuura M. 2018
Database: ecoinvent
isCopyrightProtected: true
accessRestrictedTo: 1

## General comment
The mango (Mangifera indica) is the most produced tropical fruit worldwide (FAO, 2017) and Brazil is one of its biggest exporters.This dataset represents the production of 1 kg of raw mango, produced in the agricultural region of San Francisco Valley and consumed in the national market as well as exported to several countries.The varieties (cultivars) considered were Tommy atkins, Palmer, Keitt, Kent and Palmer.
The yield is 34667 kg/ha on average, production starting in the 4th year with 20000kg/ha.year and in the 6th year it is stabilized with 40000kg/ha.year.
Mango trees are disposed in the field at a density of 376 plants per hectare on average, but the density varies widely between farms plots, with a minimum of 160plants/ha and a maximum of 833 plants/ha. The mango trees in this region are irrigated by micro sprinklers and the nutrition is provided by the use of mineral fertilizers, with the following average amounts: 98kg N/ha.year, 70kg P2O5, 205kg K2O/ha.year, plus micronutrient inputs. As for pesticides, an average of 7.66kg/ha.year of various active ingredients were applied on average. Bibliography is listed in the text box below.
CARVALHO, C. R. L., ROSSETTO, C. J., MANTOVANI, D. M. B., MORGANO, M. A., CASTRO., J. D., BORTOLETTO, N. Avaliação de cultivares de mangueira selecionadas pelo Instituto Agronômico de Campinas comparadas a outras de importância comercial. Rev. Bras. Frutic., 26 (2): 264-271, 2004.
Corrêa, F. L. O., Ramos, J. D. R., Gama-Rodrigues, A. C., Müller, M. W. Produção de serapilheira em sistema agroflorestal multiestratificado no estado de Rondônia, Brasil. Tese de Doutorado, apresentada à Universidade Federal de Lavras/UFLA, 2005.
Cunha, T. J. F., Silva, F. H. B. B., Silva, M. S. L., Giongo, V., Sá, I. B., Oliveira Neto, M. B., Cavalcanti, A. C. Solos do Submédio do Vale do São Francisco: Potencialidades e Limitações para uso agrÌcola. Série Documentos, 2011. ISSN 1808-9992, 2008.
Emmenegger, M., Reinhard, J., Zah, R. Sustainability quick check for biofuels - intermediate background report. Dubendorf, 2009.
Giongo, V., Salviano, A. M., Santana, M., OlszevKy, N., Silva, D.J., Gava, C.A.T., Cunha, T.J.F. PLA.NT COCKTAIL AS GREEN MANURE IN SEMI-ARID REGIONS TO IMPROVE SOIL CARBON AND NITROGEN STOCKS. Submitted in 2017.
IPCC. Guidelines for National Greenhouse Gas Inventories. 2006
Mouco, M.A.C., Silva, D.J. , Giongo, V., Mendes, A.M.S. Green Manures in ‘Kent’ Mango Orchard. Acta Hort. 1075, ISHS, 2015.
NEMECEK, T.; SCHNETZER, J. Methods of assessment of direct field emissions for LCIs of agricultural production systems. Zurich, Data v3.0, 2011.
Oliveira, A. R., et al. Cultivo da Mangueira. Sistemas de Produção, 2 - 2ª edição. ISSN 1807-0027. 2010.
Silva, D.J., Pereira, J.R., Mouco, M.A.C., Albuquerque, J.A.S., Raij, B., Silva , C.A. Nutrição Mineral e Adubação da Mangueira em Condições Irrigadas. Circular Técnica. Embrapa, 2004.
Nemecek T., Bengoa X., Lansche J., Mouron, P., Riedener E., Rossi V. & Humbert S. (2015) Methodological Guidelines for the Life Cycle Inventory of Agricultural Products. Version 3.0, July 2015. World Food LCA Database (WFLDB). Quantis and Agroscope, Lausanne and Zurich, Switzerland.
Novaes, et al. (2017) Estimating 20-year land use change and derived CO2 emissions associated to crops, pasture and forestry in Brazil and each of its 27 states. Global Change Biology. 2017;00:1-13. https://doi.org/10.1111/gcb.13708.

## Included activities start
This activity starts at land clearing and preparation.

## Included activities end
The dataset includes the inputs of seedlings, mineral fertilisers, pesticides and water from irrigation. It is assumed that no organic fertilisers are applied.
The dataset also includes all machine operations and corresponding machine infrastructure and sheds. Machine operations are: Land clearing, planting, distribution of fertilisers at planting, pulverising, pruning and harvest transport by tractor.
Further, direct field emissions are included, with important regionalizations added.
The activity ends after harvest at the farm gate.

## Geography
The inventory is modelled for the San Francisco valley, states of Pernambuco and Bahia, Brazil.

## Technology
Cultivation of mango

## Time period
Time period of the most of the data collected for this dataset.

## Parameters
- Factor for tillage practice: 0.25 dimensionless; name Ft
  According to Table 7-4, Emmenergger et al. (2009), for 'no tillage'.
- Phosphorus content: 0.00095 kg/kg; name Phosphorus_Pcr
  Phosphorous content in the top soil, according to Nemecek & Schnetzer, p.17.
- amount of N from urea: 41.985 kg N/ha; name urea_as_N
  Input of urea (45%N) as nitrogen
- clay content into soil: 13.6667 % (obsolete); name Clay_content
  Fraction of clay content into soil; Soil types in the São Francisco Valley where mangos are cultivated are: Neossolos Quartzarênicos (6%), Argissolos (20%) , Latossolos (15%) e Vertissolos (74%), acoording to Cunha et al (2008) and Oliveira et al (2010). Bust according to producers and reserachers of Embrapa Semiarid, most of the mango orchards are cultivated in Quartzarênicos (6%), Argissolos (20%) , Latossolos (15%). Thus, the clay avarage content (%) obtained considering these three soil types is applied ((6+20+15)/3=~14).
- crop factor: 0.1 dimensionless; name crop_factor_c1
  According to Ontario Ministry of Agriculture (http://www.omafra.gov.on.ca/english/engineer/facts/12-051.htm):
  - Fruit trees = 0.1
- emission factor Nfertilizer_ammonia: 0.04 dimensionless; name EF_N_ammonia
  Emission factor for ammonia emissions (NH3) from the application of generic nitrogen fertilisers, according to Nemecek & Schnetzer (2011), p.18
- emission factor ammoniumnitrate_ammonia: 0.02 dimensionless; name EF_amm_ammonia
  Emission factor for ammonia emissions (NH3) from the application of Ammonium nitrate and Calcium ammonium nitrate, according to Nemecek & Schnetzer (2011), p.18
- emission factor urea_ammonia: 0.15 dimensionless; name EF_urea_ammonia
  Emission factor for ammonia emissions (NH3) from urea application, according to Nemecek & Schnetzer (2011), p.18
- enrichment factor P: 1.86 dimensionless; name factor_Fr
  Enrichment factor for phosphorus, used for estimation of phosphorus emissions to surface water through erosion mechanisms, according to Nemecek & Schnetzer (2011).
- erodibility factor: 0.0345 t*h/(MJ*mm); name erodibility_factor_k
  Erodibility factor: mean value for soils in the region: Entisols: k = 0.026; Ulltisol: k=0,026; Vertisol: k=0,046 and Oxisols: k=0.040. (Table 7.2 Emmenegger et al.,2009)
- erosivity factor: 174.497 MJ*mm/(ha*h*yr); name erosivity_factor_R
  Erositivy factor used in the SQCB model for soil erosion calculations (Emmenegger et al.,2009) for precipitation inferior to 850mm/year: R = 0.0483*P^1.61. This value is for regions where there is uniform annual precipitation, which is not the case in the San francisco valley region, (since there is a month with more than 15% of average annual precipitation) so in this case the erosivity factor is multiplied by 10%. R' = 0,1*R.
- fraction loss soil to river: 0.2 dimensionless; name fraction_soil_Ferw
  Represents the fraction of eroded soil that reaches the river, used for calculation of phosphorus emissions through water erosion to surface water, according to Nemecek & Schnetzer (2011).
- fraction, irrigation water to surface water: 0.2 dimensionless; name fraction_irrigation_to_river
  Literature value (Siebert, 2010) (Vionnet, S., Quantis Water Database - Technical Report, 2012).
- fraction, irrigation water, to air: 0.65 dimensionless; name fraction_irrigation_to_air
  (same comment as for fraction, irrigation water to surface water)
- fraction, irrigation water, to ground water: 0.8 dimensionless; name fraction_irrigation_to_ground
  (same comment as for fraction, irrigation water to surface water)
- generic nitrogen: 43 kg N/ha; name N_generic
  Amount of nitrogen from different sources of fertilisers, except those which have specific emission factor. e.g. for ammonia emissions to air, fertilisers as 'urea', 'ammonium nitrate', between others have specific emission factors, yet others do not and are classified as 'generic N fertilisers' which have a "generic" mean emission factor (see table on p. 8 - Nemecek & Schnetzer, 2011).
- nitrogen availability for plants: 98.5142 kg; name N_from_fertilizers
  Total nitrogen input from fertilizers in kg N per hectare.
- nitrogen crop residues: 14.3024 kg N/ha; name nitrogen_Ncr
  Nitrogen containing in crop residues, for mango: Leaf litter is 1120 kg dry matter/há.year (Correa et al, 2006). N content in mango leaf is 12.77 g N/kg of dry matter (Assis et al, 2004). Ncr = 1.85 kg N/ha. In one average year = 1120*12,77/1000 = 14,30 kg N.
- nitrogen from NH4NO3: 2.32 kg N/ha; name NH4NO3_as_N
  Nitrogen from Ammonium nitrate and Calcium ammonium nitrate
- nitrogen uptake by plant: 62.5333 kg N/ha; name Nuptake_plant
  *N in the tree is 120 kg N/ha from 6th year onward (until 30 years) (data from lab analysis). =120/30 that is divided by 30 years. Leaf litter is 1120 kg dry matter/ha.year (Correa et al, 2006).
  *Mango fruit: N (kg N/t of fresh mango.year) =1,27 kg/t.year (Silva et al, 2004). Productivity in the years 4 and 5 is 20t/ha.year and from the 6o year onward, 40t/ha.year (according to producers).
  *N content in mango leaf is 12.77 g N/kg of dry matter (Assis et al, 2004). Acording to Correa et al (2006), the ammount of fallen leaf for mango tree is 1.12 t/ha. In one average year leaf uptake = 1120*12,77/1000 = 14,30 kg N/year.
  *Prunning: According to Mouco et al (2015), There are 4 formation prunnings in the first 3 years (1 kg N/ha.year, =14,9*250*0,2*0,004/3). From the 4th year onward, 1 prroduction pruning (0,8 kgN/ha.year) . kg N/ha.30 years = (((1*(3/30)+(0,8*(4/30)))
  Estimated uptake (tree+fruits+leafs+prunning) for one average year is the sum of each one of the above.
- organic nitrogen into soil: 1350 kg N/ha; name Norg_soil
  Norg is the mass of organic nitrogen contained in the upper 50 cm of soil per ha. Naturally only a fraction of this mass is mineralised and, hence, available for uptake by plants and leaching to the ground water. Values for the San Francisco valley region were taken from Giongo et al. (2017)
- practice factor for anti-erosion practice: 1 dimensionless; name practice_factor_erosion
  Practice factor for anti-erosion factor, equivalent to 1(one) for 'no practice' or 'up and down slope', according to table 7.5 Emmenegger et al. (2009).
- precipitation: 677.573 mm
  Precipitation considered in the SQCB tool (Emmenegger et al, 2009) for soil erosion calculations is the annual precipitation of the region (mm/year) plus 10% of the anual irrigation: P+0,1*irrigation.
- precipitation, annual: 1825.73 mm/year; name precipitation_irrigation
  Average precipitation in the region is 550 mm/year (Oliveira et al., 2010); According to The SQCB-NO3 model - Emmeneger et al. (2009) -, in order to calculate NO3- emissions, the "precipitation" used is the sum of annual precipitation and irrigation (mm/ha.year).
- rooting depth: 1.5 m; name L
  Plant rooting depth, value from mango tree is taken from Oliveira et al.(2010)
- slope factor: 0.834186 dimensionless; name slope_factor_LS
  Calculated for slope lenght = 100m and slope of 5%, according to Emmenegger et al.(2009)
- soil loss due to erosion: 0.125548 metric ton/(ha*year)
- yield kgha: 34666.7 kg/ha; name yield_kg_ha
  Average productivity per year, in kg of mango per hectare.

## Reference product
- mango: 1 kg; By-product classification allocatable product; CPC 0131: Tropical and subtropical fruits; lognormal variance with pedigree 0.0032, pedigree (1,1,1,1,1)
  production volume 4.18243e10 kg
  properties: carbon allocation 0.084 kg, carbon content 0.42, carbon content, fossil 0, carbon content, non-fossil 0.42, dry mass 0.2 kg, price 0.61643 EUR2005, water content 4, water in wet mass 0.8 kg, wet mass 1 kg

## Inputs from technosphere
- application of plant protection product, by field sprayer: 0.000346 ha; lognormal variance with pedigree 0.3026, pedigree (2,4,3,5,1)
- chlorine dioxide: 4.611e-9, 2.1889e-8 kg (2 suppliers, which the file names only by identifier); sum of these 2.65e-8 kg; lognormal variance with pedigree 0.0046, pedigree (3,4,3,5,1)
  properties: dry mass 1 kg, wet mass 1 kg
- cobalt: 8.4e-6 kg; lognormal variance with pedigree 0.0026, pedigree (1,4,3,5,1)
  properties: dry mass 1 kg, wet mass 1 kg
- dolomite: 0.000139205, 0.000262795 kg (2 suppliers, which the file names only by identifier); sum of these 0.000402 kg; lognormal variance with pedigree 0.0026, pedigree (1,4,3,5,1)
  properties: carbon content, fossil 0.130435, dry mass 1 kg, heating value, net 3.95 MJ, wet mass 1 kg
- ethoxylated alcohol (AE>20): 4.86e-6 kg; lognormal variance with pedigree 0.0046, pedigree (3,4,3,5,1)
  properties: heating value, net 29.26 MJ
- gypsum, mineral: 3.46104e-5, 0.000343335, 0.0164449, 7.7112e-5 kg (4 suppliers, which the file names only by identifier); sum of these 0.0169 kg; lognormal variance with pedigree 0.0026, pedigree (1,4,3,5,1)
  properties: dry mass 1 kg, wet mass 1 kg
- harvesting, forestry harvester: 9.61538e-6 hour; lognormal variance with pedigree 0.304, pedigree (3,4,3,5,1)
- inorganic nitrogen fertiliser, as N: 1.39232e-5, 4.65111e-7, 9.90513e-7, 2.29282e-5, 0.00154548, 2.56672e-5, 2.41025e-6, 1.78867e-5, 1.72981e-6, 0.000352865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 kg (29 suppliers, which the file names only by identifier); sum of these 0.00284 kg; lognormal variance with pedigree 0.0026, pedigree (1,4,3,5,1)
  properties: dry mass 1 kg, wet mass 1 kg
- inorganic phosphorus fertiliser, as P2O5: 1.97099e-5, 1.24046e-5, 6.46147e-6, 8.80738e-6, 0.000165259, 1.51917e-5, 1.81379e-5, 8.16846e-6, 9.41495e-6, 3.27414e-6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 kg (29 suppliers, which the file names only by identifier); sum of these 0.00203 kg; lognormal variance with pedigree 0.0026, pedigree (1,4,3,5,1)
  properties: dry mass 1 kg, wet mass 1 kg
- inorganic potassium fertiliser, as K2O: 1.62322e-6, 1.42826e-5, 0.000864858, 3.3523e-7, 0.00031913, 5.34603e-6, 4.17626e-5, 3.69635e-5, 0.00333767, 2.05902e-5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 kg (29 suppliers, which the file names only by identifier); sum of these 0.00592 kg; lognormal variance with pedigree 0.0026, pedigree (1,4,3,5,1)
  properties: dry mass 1 kg, wet mass 1 kg
- irrigation: 0.000631834, 0.00130001, 0.096173, 0.180535, 0.00937486, 0.00169407, 9.50547e-6, 0.000379028, 0.00184867, 0.000369595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 m3 (16 suppliers, which the file names only by identifier); sum of these 0.368 m3; lognormal variance with pedigree 0.0026, pedigree (1,4,3,5,1)
  properties: dry mass 0.11 kg, water content 9089.91, wet mass 1000 kg
- lime: 1.8502e-5, 1.59799e-6 kg (2 suppliers, which the file names only by identifier); sum of these 2.01e-5 kg; lognormal variance with pedigree 0.0026, pedigree (1,4,3,5,1)
  properties: carbon content, fossil 0.120005, dry mass 1 kg, wet mass 1 kg
- magnesium oxide: 0.00227 kg; lognormal variance with pedigree 0.0046, pedigree (1,4,3,5,1)
  properties: dry mass 1 kg, wet mass 1 kg
- mancozeb: 1.33e-5 kg; lognormal variance with pedigree 0.0026, pedigree (1,4,3,5,1)
  properties: carbon content, fossil 0.17759, dry mass 1 kg, wet mass 1 kg
- manganese concentrate: 0.000107 kg; lognormal variance with pedigree 0.0026, pedigree (1,4,3,5,1)
  properties: dry mass 1 kg, wet mass 1 kg
- mango seedling, for planting: 0.000362 unit; lognormal variance with pedigree 0.0026, pedigree (1,4,3,5,1)
  properties: carbon content, non-fossil 0.439481, dry mass 0.578035 kg, water content 0.73, wet mass 1 kg
- molybdenum trioxide: 4.88e-6 kg; lognormal variance with pedigree 0.0046, pedigree (1,4,3,5,1)
  properties: bismuth content 8e-5, copper content 0.0006, iron content 0.0044, lead content 0.00015, molecular weight 143.9 g/mol, molybdenum content 0.62, oxygen content 0.29, sulfur content 0.0003
- packaging, for fertilisers: 0.0607642 kg; lognormal variance with pedigree 0.0512, pedigree (4,3,3,5,4)
  properties: carbon content, fossil 0.825301, dry mass 1 kg, heating value, net 25.01 MJ, price 0.0642 EUR2005, wet mass 1 kg
- packaging, for pesticides: 0.00421973 kg; lognormal variance with pedigree 0.0512, pedigree (4,3,3,5,4)
  properties: carbon content, fossil 0.85714, dry mass 1 kg, heating value, net 25.97 MJ, price 0.0642 EUR2005, wet mass 1 kg
- pesticide, unspecified: 0.000208 kg; lognormal variance with pedigree 0.0026, pedigree (1,4,3,5,1)
  properties: carbon content, fossil 0.486978, dry mass 1 kg, wet mass 1 kg
- phenol: 1.15115e-6, 3.68849e-7 kg (2 suppliers, which the file names only by identifier); sum of these 1.52e-6 kg; lognormal variance with pedigree 0.0046, pedigree (3,4,3,5,1)
  properties: carbon content, fossil 0.765957, dry mass 1 kg, heating value, net 30.93 MJ, wet mass 1 kg
- planting with starter fertiliser, by no till planter: 9.62e-7 ha; lognormal variance with pedigree 0.344, pedigree (5,4,3,5,1)
- polydimethylsiloxane: 8.8e-7 kg; lognormal variance with pedigree 0.0046, pedigree (3,4,3,5,1)
  properties: heating value, net 19.62 MJ
- sulfur: 0.00148 kg; lognormal variance with pedigree 0.0026, pedigree (1,4,3,5,1)
  properties: dry mass 1 kg, wet mass 1 kg
- tap water: 3.27151e-6, 2.42087e-7, 3.74375e-5, 2.79555e-5, 7.8503e-8, 1.29739e-7, 8.51075e-8 kg (7 suppliers, which the file names only by identifier); sum of these 6.92e-5 kg; lognormal variance with pedigree 0.0846, pedigree (5,4,3,5,4)
  properties: carbon content, fossil 0.00178991, dry mass 0.000337476 kg, water content 2962.17, wet mass 1 kg
- tillage, harrowing, by offset leveling disc harrow: 1.9231e-6 ha; lognormal variance with pedigree 0.344, pedigree (5,4,3,5,1)
- tillage, subsoiling, by subsoiler plow: 9.6154e-7 ha; lognormal variance with pedigree 0.318, pedigree (4,5,3,5,1)
- transport, tractor and trailer, agricultural: 0.00099595, 4.05e-6 metric ton*km (2 suppliers, which the file names only by identifier); sum of these 0.001 metric ton*km; lognormal variance with pedigree 0.304, pedigree (3,4,3,5,1)
- waste wood, untreated: -0.00418803, -0.0352067, -0.000329499, -2.40901e-5, -0.000139815, -0.000221036, -0.000925462 kg (7 suppliers, which the file names only by identifier); sum of these -0.0410346 kg; lognormal variance with pedigree 0.0426, pedigree (5,4,1,5,1)
  properties: carbon content, non-fossil 0.4788, dry mass 0.8 kg, heating value, net 13.99 MJ, water content 0.25, wet mass 1 kg
- weed control, by brush cutter, pasture: 0.000173 ha; lognormal variance with pedigree 0.344, pedigree (5,4,3,5,1)
- zinc oxide: 0.000281 kg; lognormal variance with pedigree 0.0046, pedigree (1,4,3,5,1)
  properties: dry mass 1 kg, wet mass 1 kg

## Inputs from nature
- Carbon dioxide, in air [natural resource, in air]: 0.307977 kg; lognormal variance with pedigree 0.0046, pedigree (3,4,3,5,1)
- Energy, gross calorific value, in biomass [natural resource, biotic]: 2.5 MJ; lognormal variance with pedigree 0.0426, pedigree (5,4,3,5,1)
- Occupation, permanent crop, irrigated [natural resource, land]: 0.288462 m2*year; lognormal variance with pedigree 0.0066, pedigree (2,4,3,5,1)
- Transformation, from permanent crop, irrigated [natural resource, land]: 0.0144231 m2; lognormal variance with pedigree 0.0126, pedigree (2,4,3,5,1)
- Transformation, to permanent crop, irrigated [natural resource, land]: 0.0144231 m2; lognormal variance with pedigree 0.0126, pedigree (2,4,3,5,1)

## Emissions to nature
- Ammonia [air, unspecified]: 0.000282467 kg; lognormal variance with pedigree 0.012, pedigree (3,4,3,5,1)
- Carbon dioxide, fossil [air, unspecified]: 0.00195611 kg; lognormal variance with pedigree 0.0046, pedigree (3,4,3,5,1)
- Dinitrogen monoxide [air, unspecified]: 6.8699e-5 kg; lognormal variance with pedigree 0.034, pedigree (3,4,3,5,1)
- Nitrogen oxides [air, unspecified]: 0.000111977 kg; lognormal variance with pedigree 0.034, pedigree (3,4,3,5,1)
- Water [air, unspecified]: 0.2392 m3; lognormal variance with pedigree 0.04463, pedigree (3,4,3,5,4)
- Abamectin [soil, agricultural]: 1.21e-7 kg; lognormal variance with pedigree 0.075, pedigree (5,4,3,5,1)
- Azoxystrobin [soil, agricultural]: 5.62e-6 kg; lognormal variance with pedigree 0.075, pedigree (5,4,3,5,1)
- Cadmium II [soil, agricultural]: 8.7e-8 kg; lognormal variance with pedigree 0.044, pedigree (3,4,3,5,1)
- Chloride [soil, agricultural]: 2.65e-8 kg; lognormal variance with pedigree 0.082, pedigree (5,4,3,5,1)
- Chromium III [soil, agricultural]: 7.19e-7 kg; lognormal variance with pedigree 0.044, pedigree (3,4,3,5,1)
- Copper ion [soil, agricultural]: 1.84e-13 kg; lognormal variance with pedigree 0.25, pedigree (5,5,5,5,5)
- Difenoconazole [soil, agricultural]: 5.08e-6 kg; lognormal variance with pedigree 0.075, pedigree (5,4,3,5,1)
- Ethephon [soil, agricultural]: 7.41e-6 kg; lognormal variance with pedigree 0.075, pedigree (5,4,3,5,1)
- Indoxacarb [soil, agricultural]: 9.12e-7 kg; lognormal variance with pedigree 0.075, pedigree (5,4,3,5,1)
- Lead II [soil, agricultural]: 3.44e-8 kg; lognormal variance with pedigree 0.044, pedigree (3,4,3,5,1)
- Mancozeb [soil, agricultural]: 1.33e-5 kg; lognormal variance with pedigree 0.075, pedigree (5,4,3,5,1)
- Nickel II [soil, agricultural]: 1.52e-7 kg; lognormal variance with pedigree 0.044, pedigree (3,4,3,5,1)
- Pesticides, unspecified [soil, agricultural]: 0.000149 kg; lognormal variance with pedigree 0.072, pedigree (5,4,3,5,1)
- Pyraclostrobin [soil, agricultural]: 2.82e-6 kg; lognormal variance with pedigree 0.075, pedigree (5,4,3,5,1)
- Spinosad [soil, agricultural]: 4.21e-9 kg; lognormal variance with pedigree 0.075, pedigree (5,4,3,5,1)
- Tebuconazole [soil, agricultural]: 8.16e-6 kg; lognormal variance with pedigree 0.075, pedigree (5,4,3,5,1)
- Thiophanate-methyl [soil, agricultural]: 2.79e-5 kg; lognormal variance with pedigree 0.075, pedigree (5,4,3,5,1)
- Trifloxystrobin [soil, agricultural]: 8.07e-7 kg; lognormal variance with pedigree 0.075, pedigree (5,4,3,5,1)
- Zinc II [soil, agricultural]: 8.32e-7 kg; lognormal variance with pedigree 0.054, pedigree (3,4,3,5,1)
- Cadmium II [water, ground-]: 1.21e-9 kg; lognormal variance with pedigree 0.094, pedigree (3,4,3,5,1)
- Cadmium II [water, surface water]: 2.71e-10 kg; lognormal variance with pedigree 0.094, pedigree (3,4,3,5,1)
- Chromium III [water, ground-]: 5.68e-7 kg; lognormal variance with pedigree 0.094, pedigree (3,4,3,5,1)
- Chromium III [water, surface water]: 3.01e-8 kg; lognormal variance with pedigree 0.094, pedigree (3,4,3,5,1)
- Copper ion [water, ground-]: 8.59e-8 kg; lognormal variance with pedigree 0.094, pedigree (3,4,3,5,1)
- Copper ion [water, surface water]: 2.24e-8 kg; lognormal variance with pedigree 0.094, pedigree (3,4,3,5,1)
- Lead II [water, ground-]: 3.96e-9 kg; lognormal variance with pedigree 0.094, pedigree (3,4,3,5,1)
- Lead II [water, surface water]: 6.01e-9 kg; lognormal variance with pedigree 0.094, pedigree (3,4,3,5,1)
- Nickel II [water, surface water]: 1.93e-8 kg; lognormal variance with pedigree 0.094, pedigree (3,4,3,5,1)
- Nitrate [water, ground-]: 0.0052246 kg; lognormal variance with pedigree 0.044, pedigree (3,4,3,5,1)
- Phosphorus [water, surface water]: 1.27986e-6 kg; lognormal variance with pedigree 0.044, pedigree (3,4,3,5,1)
- Water [water, ground-]: 0.10304 m3; lognormal variance with pedigree 0.04463, pedigree (3,4,3,5,4)
- Water [water, surface water]: 0.02576 m3; lognormal variance with pedigree 0.04463, pedigree (3,4,3,5,4)
- Zinc II [water, ground-]: 4.42e-7 kg; lognormal variance with pedigree 0.094, pedigree (3,4,3,5,1)
- Zinc II [water, surface water]: 3.1e-8 kg; lognormal variance with pedigree 0.094, pedigree (3,4,3,5,1)

## Sampling procedure
Most of data for agricultural inputs and operations was provided by local producers; Relevant experts were also consulted. Some data regarding soil in the region and seedlings was provided by Embrapa Semiarido (CNPTSA). Emissions from the agricultural process are estimated according to Nemecek and Schnetzer (2011) and Emmeneger et al. (2009)

## Extrapolations
Dry mass, carbon content and gross calorific value are based on ecoinvent database.

## Review by Jens Lansche 2017-11-12
All review comments considered.
