# electricity production, natural gas, 10MW

Dataset: EcoSpold 2, unit process
Geography: RoW
Time period: 1990-01-01 to 2022-12-31
Technology level: current
Classification: ISIC rev.4 ecoinvent: 3510:Electric power generation, transmission and distribution
Classification: EcoSpold01Categories: natural gas/power plants
Tags: ConvertedDataset
Scenario: Business-as-Usual
System model: Allocation, cut-off by classification
Generated by: [System]
Published in: Faist Emmenegger, M. 2007
Database: ecoinvent
isCopyrightProtected: true
accessRestrictedTo: 1

## General comment
[This dataset was already contained in the ecoinvent database version 2. It was not individually updated during the transfer to ecoinvent version 3. Life Cycle Impact Assessment results may still have changed, as they are affected by changes in the supply chain, i.e. in other datasets. This dataset was generated following the ecoinvent quality guidelines for version 2. It may have been subject to central changes described in the ecoinvent version 3 change report (http://www.ecoinvent.org/database/ecoinvent-version-3/reports-of-changes/), and the results of the central updates were reviewed extensively. The changes added e.g. consistent water flows and other information throughout the database. The documentation of this dataset can be found in the ecoinvent reports of version 2, which are still available via the ecoinvent website. The change report linked above covers all central changes that were made during the conversion process.]

## Included activities end
The module includes fuel input, infrastructure, and emissions to air.

## Technology
For infrastructure, a 10MWe gas turbine was assumed.

## Time period
Data of mid 1990s

## Parameters
- fraction, cooling water, to air: 0.0159178 dimensionless; name fraction_CW_to_air; lognormal variance with pedigree 0.092025, pedigree (4,4,3,2,4)
  Calculated
- scaling factor: 10.8696 dimensionless

## Reference product
- electricity, high voltage: 1 kWh; By-product classification allocatable product; CPC 17100: Electrical energy
  production volume 3.66841 kWh
  properties: Corresponding fuel use 10.8696 MJ, carbon allocation 0 kg, carbon content 0, price 0.0977 EUR2005

## Inputs from technosphere
- gas turbine, 10MW electrical: 1.25e-9 unit; lognormal variance with pedigree 0.12, pedigree (1,1,5,1,1)
- natural gas, high pressure: 0.000579828, 0.00595409, 0.00137141, 2.63099e-5, 0.0027277, 0.00332462, 0.00134725, 0.00685325, 0.00534961, 0.00196908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 m3 (43 suppliers, which the file names only by identifier); sum of these 0.298913 m3
  properties: carbon content, fossil 0.602381, dry mass 0.84 kg, heating value, net 36 MJ, wet mass 0.84 kg

## Inputs from nature
- Water, cooling, unspecified natural origin [natural resource, in water]: 0.0642236 m3; lognormal variance with pedigree 0.092025, pedigree (4,4,5,2,4)

## Emissions to nature
- Carbon dioxide, fossil [air, urban air close to ground]: 0.608696 kg; lognormal variance with pedigree 0, pedigree (1,1,5,1,1)
- Carbon monoxide, fossil [air, urban air close to ground]: 0.000434783 kg; lognormal variance with pedigree 0.3, pedigree (1,1,5,1,1)
- Dinitrogen monoxide [air, urban air close to ground]: 1.08696e-5 kg; lognormal variance with pedigree 0.3, pedigree (1,1,5,1,1)
- Dioxins, measured as 2,3,7,8-tetrachlorodibenzo-p-dioxin [air, urban air close to ground]: 3.15217e-16 kg; lognormal variance with pedigree 1.08, pedigree (1,1,5,1,1)
- Mercury II [air, urban air close to ground]: 3.26087e-10 kg; lognormal variance with pedigree 0.65, pedigree (1,1,5,1,1)
- Methane, fossil [air, urban air close to ground]: 4.8913e-5 kg; lognormal variance with pedigree 0.65, pedigree (1,1,5,1,1)
- NMVOC, non-methane volatile organic compounds [air, urban air close to ground]: 1.08696e-5 kg; lognormal variance with pedigree 0.65, pedigree (1,1,5,1,1)
- Nitrogen oxides [air, urban air close to ground]: 0.00141304 kg; lognormal variance with pedigree 0.3, pedigree (1,1,5,1,1)
- Sulfur dioxide [air, urban air close to ground]: 5.97826e-6 kg; lognormal variance with pedigree 0, pedigree (1,1,5,1,1)
- Water [air, unspecified]: 0.0010223 m3; lognormal variance with pedigree 0.092025, pedigree (4,4,5,2,4)
- Water [water, unspecified]: 0.0632013 m3; lognormal variance with pedigree 0.092025, pedigree (4,4,5,2,4)

## Sampling procedure
Literature

## Review by Michael Spielmann (obsolete) 2003-07-25
passed
