# calcium carbide production, technical grade

Dataset: EcoSpold 2, unit process
Geography: RoW
Time period: 2000-01-01 to 2022-12-31
Technology level: current
Classification: EcoSpold01Categories: chemicals/inorganics
Classification: ISIC rev.4 ecoinvent: 2011:Manufacture of basic chemicals
Tags: ConvertedDataset
Scenario: Business-as-Usual
System model: Allocation, cut-off by classification
Generated by: Roland Hischier
Published in: Althaus H.-J. 2007
Database: ecoinvent
isCopyrightProtected: true
accessRestrictedTo: 1

## General comment
The functional unit represent 1 kg of solid industrial grade calcium carbide. Large uncertainty of the process data due to weak data on the production process and missing data on process emissions.
[This dataset was already contained in the ecoinvent database version 2. It was not individually updated during the transfer to ecoinvent version 3. Life Cycle Impact Assessment results may still have changed, as they are affected by changes in the supply chain, i.e. in other datasets. This dataset was generated following the ecoinvent quality guidelines for version 2. It may have been subject to central changes described in the ecoinvent version 3 change report (http://www.ecoinvent.org/database/ecoinvent-version-3/reports-of-changes/), and the results of the central updates were reviewed extensively. The changes added e.g. consistent water flows and other information throughout the database. The documentation of this dataset can be found in the ecoinvent reports of version 2, which are still available via the ecoinvent website. The change report linked above covers all central changes that were made during the conversion process.]

## Included activities end
Raw materials and chemicals used for production, transport of materials to manufacturing plant, estimated emissions to air from production and energy demand as well as estimation of infrastructure of the plant (approximation). Solid wastes omitted.

## Geography
Data used has no specific geographical origin (stoechiometry). Average europenan processes for raw materials, transport requirements and electricity mix used.

## Technology
Production from coke and quicklime in a furnace with self-baking Söderberg electrodes (assumed to be coke as well). Inventory bases on information from literature. The emissions to air are calculated according to mass balance, while the composition is from literature.

## Time period
date of published literature

## Parameters
- fraction, cooling water, cooling pond system, to air: 0.032 dimensionless; name fraction_CW_CP_to_air; lognormal variance with pedigree 0.0413, pedigree (2,3,1,3,1)
  Calculated based on literature value (Scown, C.D., 2011, Water Footprint of U.S. Transportation Fuels and supplying information of the article) (Vionnet, S., Quantis Water Database - Technical Report, 2012).
- fraction, cooling water, once-through system, to air: 0.004 dimensionless; name fraction_CW_OT_to_air; lognormal variance with pedigree 0.0413, pedigree (2,3,1,3,1)
  (same comment as for fraction, cooling water, cooling pond system, to air)
- fraction, cooling water, recirculating system, to air: 0.771 dimensionless; name fraction_CW_R_to_air; lognormal variance with pedigree 0.0413, pedigree (2,3,1,3,1)
  (same comment as for fraction, cooling water, cooling pond system, to air)
- fraction, cooling water, to air: 0.3875 dimensionless; name fraction_CW_to_air; = (0.5*fraction_CW_OT_to_air)+(0.5*fraction_CW_R_to_air); lognormal variance with pedigree 0.092025, pedigree (4,4,3,2,4)
  Calculated value based on literature value (see comments of the other parametres present in this dataset) and expert opinion. In the case when no industry/literature data are available about the type of cooling or directly fraction, cooling water, to air specific for the process a default assumption is applied. It is assumed that the once-through cooling system is used in 50% of all cases and recirculating system is used in another 50% of all cases.

## Reference product
- calcium carbide, technical grade: 1 kg; By-product classification allocatable product; CPC 34280: Hydrogen peroxide; phosphides; carbides; hydrides, nitrides, azides, silicides and borides
  production volume 2.67763 kg
  properties: carbon allocation 0.375 kg, carbon content 0.375, carbon content, fossil 0.375, carbon content, non-fossil 0, dry mass 1 kg, heating value, net 11.36 MJ, price 0.43 EUR2005, water content 0, water in wet mass 0 kg, wet mass 1 kg

## Inputs from technosphere
- chemical factory, organics: 4e-10 unit; lognormal variance with pedigree 0.548, pedigree (4,5,5,5,5)
- coke: 17.9 MJ; lognormal variance with pedigree 0.1786, pedigree (4,5,5,5,5)
  properties: carbon content, fossil 0.869149, dry mass 0.0328671 kg, heating value, net 28.6 MJ, water content 0.0638298, wet mass 0.034965 kg
- electricity, medium voltage: 0.220429, 0.110625, 2.02246, 0.0334942, 0.00656438, 0.706431 kWh (6 suppliers, which the file names only by identifier); sum of these 3.1 kWh; lognormal variance with pedigree 0.17, pedigree (5,5,5,5,4)
- quicklime, milled, loose: 0.893 kg; lognormal variance with pedigree 0.1786, pedigree (4,5,5,5,5)
  properties: dry mass 0.99 kg, water content 0.010101, wet mass 1 kg

## Inputs from nature
- Water, cooling, unspecified natural origin [natural resource, in water]: 0.024 m3; lognormal variance with pedigree 0.17, pedigree (5,5,5,5,4)

## Emissions to nature
- Carbon dioxide, fossil [air, urban air close to ground]: 0.0122 kg; lognormal variance with pedigree 0.2, pedigree (5,5,5,5,4)
- Carbon monoxide, fossil [air, urban air close to ground]: 0.437 kg; lognormal variance with pedigree 0.9, pedigree (5,5,5,5,5)
- Hydrogen [air, urban air close to ground]: 0.00388 kg; lognormal variance with pedigree 0.33, pedigree (5,5,5,5,5)
- Methane, fossil [air, urban air close to ground]: 0.00148 kg; lognormal variance with pedigree 0.33, pedigree (5,5,5,5,5)
- Water [air, unspecified]: 0.0093 m3; lognormal variance with pedigree 0.0427, pedigree (2,2,5,5,1)
- Water [water, unspecified]: 0.0147 m3; lognormal variance with pedigree 0.0427, pedigree (2,2,5,5,1)

## Sampling procedure
Process data based on information in just one literature source. Process emissions based on mass balance estimations.

## Extrapolations
This dataset has been copied from an original dataset covering the geography RER. The uncertainty has been adjusted accordingly.

## Review by Heiko Kunst 2003-06-20
Passed
Passed
