# hydroxylamine production

Dataset: EcoSpold 2, unit process
Geography: RoW
Time period: 2010-01-01 to 2022-12-31
Technology level: current
Classification: ISIC rev.4 ecoinvent: 2011:Manufacture of basic chemicals
Synonyms: HYDROXYAMINE; NH2OH; Nitroxide; Oxammonium
Scenario: Business-as-Usual
System model: Allocation, cut-off by classification
Share of production covered: 100 %
Generated by: Jürgen Sutter
Database: ecoinvent
isCopyrightProtected: true
accessRestrictedTo: 1

## General comment
This dataset represents the production of hydroxylamine from ammonium nitrite by the Raschig process. Hydroxylamine forms transparent, colourless, odourless crystals. The compound is readily soluble in water, methanol, and ethanol. More than 95 % of hydroxylamine production is used to produce cyclohexanone oxime or caprolactam. Depending on patents and available technology, various producers use either hydrogenation or the Raschig process. The differences lie mainly in the amount of ammonium sulfate produced in oximation. Hydroxylammonium salts are also used in many branches of the chemical industry as a stable form of hydroxylamine because of the ease with which they undergo reactions. Some applications include the following:
1. Chemical industry: a reactant for the production of oximes as intermediates; an oxidizing or reducing agent, depending on pH
2. Paints and coatings: production of special oximes for use in anticreaming agents
3. Pharmaceuticals: production of antibiotics, steroids, tranquilizers, spasmolytics, and antitubercular drugs
4. Photography: stabilizer for developers; additive for colour emulsions
5. Rubber industry: regulator in the polymerization of synthetic rubber; antioxidant for natural rubber; accelerator for the vulcanization of synthetic rubber
6. Soap: auxiliary for refining fats for soap production
7. Plastics: regulator and inhibitor in various polymerizations
8. Metallurgy: additive for surface treatment of steel; auxiliary for metal extraction from electrolysis waste liquor and for reclaiming spoil tips; flotation agent for copper ores
9. Nuclear industry: auxiliary for separation of uranium and plutonium
10.Textiles: auxiliary for specific dyeing processes; fixative for textile dyes; starting material for textile dyes based on isatin and isoxazole
11. Crop protection: starting material for production of insecticides, herbicides, and plant growth regulators
12. Food: intermediate in the production of sweeteners
In the inventory, the raw materials are modelled with a stoechiometric calculation. Emissions are estimated. Energy and water consumptions are approximated based on data from a large chemical factory (Gendorf 2016).
References:
Frischknecht R., Jungbluth N., Althaus H.-J., Doka G., Dones R., Heck T., Hellweg S., Hischier R., Nemecek T., Rebitzer G. and Spielmann M. (2007) Overview and Methodology. Final report ecoinvent v2.0 No. 1. Swiss Centre for Life Cycle Inventories, Dübendorf, CH, retrieved from: www.ecoinvent.org.
Ritz, J., Fuchs, H. and Perryman, H. G. 2000. Hydroxylamine. Ullmann's Encyclopedia of Industrial Chemistry.
Gendorf (2016) Umwelterklärung 2015, Werk Gendorf Industriepark, www.gendorf.de.

## Included activities start
The activity starts when the raw materials enter the process.

## Included activities end
This activity ends with the production of hydroxylamine, including materials, energy uses, infrastructure, and emissions.

## Geography
The data used has no specific geographical origin as it is based on stoechiometric calculations and estimations. Some values are based on data from a large chemical factory located in Germany. These are assumed to be valid for this geography.

## Technology
Industrial production of hydroxylamine is carried out by reduction of the higher oxidation states of nitrogen. For example, nitric oxide or nitric acid can be hydrogenated catalytically to hydroxylamine. For the reduction of nitrous acid to hydroxylamine, sulfurous acid is used. In all cases the product is an aqueous solution of a salt NH2OH • HX (where HX is an acid, e.g., sulfuric or phosphoric acid) or (NH3OH)X, rather than free hydroxylamine. Acid hydrolysis of primary nitroalkanes, with simultaneous formation of the corresponding carboxylic acid, plays only a minor role in the production of hydroxylamine.
Catalytic Hydrogenation of Nitric Oxide
To produce nitric oxide of high purity, ammonia and oxygen are reacted together over a platinum–rhodium catalyst at a temperature above 900 °C, the reaction gas being diluted with enough water or water vapor to bring the mixture below the lower explosion limit.
The byproduct, nitrogen dioxide, and excess oxygen are subsequently hydrogenated over a silver catalyst to nitric oxide and water, respectively.
After condensation and simultaneous recovery of water vapor, nitric oxide is purified in a washer and converted to hydroxylamine by reaction with hydrogen below 50 °C over a suspension of partially poisoned platinum catalyst in sulfuric acid. Small amounts of ammonium sulfate and dinitrogen monoxide are produced as byproducts.
A continuous multistep process, in which the exhaust gases are extensively recirculated, has proved itself industrially. Residual gas, composed of hydrogen, nitrogen, nitric oxide, and dinitrogen monoxide, can be burned for recovery of steam. Explosive gas mixtures can be avoided in the synthesis of hydroxylamine by the choice of suitable gas composition.
Catalytic Hydrogenation of Nitrates
In the hydroxylamine –phosphate –oxime (HPO) process hydroxylamine is produced by hydrogenation of ammonium nitrate solution in phosphoric acid in combination with synthesis of cyclohexanone oxime for production of caprolactam. This process is described in Caprolactam.
The Raschig Process
The Raschig process, sometimes modified, remains an important process for the production of hydroxylamine.
Water, ammonia, and carbon dioxide react together in an absorption column to give a solution of ammonium carbonate, which forms an alkaline solution of ammonium nitrite with nitrogen oxides at low temperature. In a further step, the ammonium nitrite is converted to ammonium hydroxylamine disulfonate with sulfur dioxide. In this process, excess ammonium hydroxylamine disulfonate is recycled. The ammonium hydroxylamine disulfonate solution is drawn off and the salt is hydrolyzed and neutralized to give hydroxylammonium sulfate and ammonium sulfate as products.
Acid Cleavage of Nitroalkanes
Mixtures of nitropropane and nitromethane can be cleaved to hydroxylammonium sulfate and the corresponding carboxylic acid by sulfuric acid at elevated temperature. This process has been used only to a limited extent because of its cost and the limited availability of raw materials.
Production of Crystalline Salts
Catalytic hydrogenation of nitric oxide leads to solutions of hydroxylammonium salts, which, after removal of the hydrogenation catalyst and neutralization with ammonia if required, can be allowed to crystallize. The Raschig process leads initially to an oxime; acid hydrolysis, removal of the ketone, and subsequent crystallization give the solid salt.
With the intregrated hydroxylamine–cyclohexanone oxime process for production of caprolactam, the solid salts are also, in principle, accessible by acid hydrolysis of the oxime.
Reference:
Ritz, J., Fuchs, H. and Perryman, H. G. 2000. Hydroxylamine. Ullmann's Encyclopedia of Industrial Chemistry.

## Time period
Time of publications. Some values are based on data published by the Gendorf factory that were collected between 2011 and 2015. The time period has been adjusted accordingly. For more details, see the comments of the exchanges.

## Parameters
- fraction, water, decarbonised, to air: 0.15 dimensionless; name fraction_WDC_to_air; lognormal variance with pedigree 0.092025, pedigree (4,4,3,2,4)
  The decarbonised water is used as process water, thus the process water fraction to air is used.

## Reference product
- hydroxylamine: 1 kg; By-product classification allocatable product; CPC 34150: Amine-function compounds; oxygen-function amino-compounds, except lysine and its esters and salts thereof and […]
  production volume 6.608e8 kg
  properties: carbon allocation 0 kg, carbon content 0, carbon content, fossil 0, carbon content, non-fossil 0, dry mass 1 kg, heating value, net 11.01 MJ, price 3.66409 EUR2005, water content 0, water in wet mass 0 kg, wet mass 1 kg

## Inputs from technosphere
- ammonia, anhydrous, liquid: 0.23309, 0.00634226, 0.0200369, 0.0605116, 0.0283523, 0.670732, 0.0617632, 0.0311722 kg (8 suppliers, which the file names only by identifier); sum of these 1.112 kg; lognormal variance with pedigree 0.1786, pedigree (4,5,5,5,5)
  properties: dry mass 1 kg, wet mass 1 kg
- ammonium nitrite: 2.125 kg; lognormal variance with pedigree 0.1786, pedigree (4,5,5,5,5)
  properties: dry mass 1 kg, wet mass 1 kg
- chemical factory, organics: 4e-10 unit; lognormal variance with pedigree 0.3098, pedigree (2,3,2,4,3)
- electricity, medium voltage: 0.0295802, 0.0148452, 0.271401, 0.0044947, 0.000880897, 0.0947985 kWh (6 suppliers, which the file names only by identifier); sum of these 0.416 kWh; lognormal variance with pedigree 0.0104, pedigree (2,3,2,4,3)
- heat, district or industrial, natural gas: 2.11524, 0.0347588 MJ (2 suppliers, which the file names only by identifier); sum of these 2.15 MJ; lognormal variance with pedigree 0.0104, pedigree (2,3,2,4,3)
  properties: heating value, net 1 MJ
- heat, from steam, in chemical industry: 0.2 MJ; lognormal variance with pedigree 0.0104, pedigree (2,3,2,4,3)
  properties: heating value, net 1 MJ
- hydrochloric acid, without water, in 30% solution state: 0.0342 kg; lognormal variance with pedigree 0.1786, pedigree (4,5,5,5,5)
  properties: dry mass 1 kg, heating value, net 3.32 MJ, wet mass 1 kg
- inert waste, for final disposal: -8.416 kg; lognormal variance with pedigree 0.0255, pedigree (4,5,1,1,1)
  properties: dry mass 0.995 kg, water content 0.00502513, wet mass 1 kg
- nitrogen, liquid: 0.019 kg; lognormal variance with pedigree 0.0104, pedigree (2,3,2,4,3)
  properties: dry mass 1 kg, wet mass 1 kg
- sodium hydroxide, without water, in 50% solution state: 1.249 kg; lognormal variance with pedigree 0.1786, pedigree (4,5,5,5,5)
  properties: dry mass 1 kg, heating value, net 3.03 MJ, wet mass 1 kg
- sulfur dioxide, liquid: 4.253 kg; lognormal variance with pedigree 0.1786, pedigree (4,5,5,5,5)
  properties: dry mass 1 kg, wet mass 1 kg
- tap water: 0.00203022, 0.000150233, 0.0232328, 0.000404717, 4.8717e-5, 8.05128e-5, 5.28156e-5 kg (7 suppliers, which the file names only by identifier); sum of these 0.026 kg; lognormal variance with pedigree 0.0104, pedigree (2,3,2,4,3)
  properties: carbon content, fossil 0.00178991, dry mass 0.000337476 kg, water content 2962.17, wet mass 1 kg
- wastewater, average: -2.69042e-6, -9.57892e-9 m3 (2 suppliers, which the file names only by identifier); sum of these -2.7e-6 m3; lognormal variance with pedigree 0.0104, pedigree (2,3,1,4,3)
  properties: carbon content, non-fossil 0.194039, dry mass 0.346837 kg, water content 2882.2, wet mass 1000 kg
- water, decarbonised: 0.0454486, 0.664084, 0.356905, 0.088491, 0.0340089, 0.563718, 0.00434435 kg (7 suppliers, which the file names only by identifier); sum of these 1.757 kg; lognormal variance with pedigree 0.1786, pedigree (4,5,5,5,5)
  properties: wet mass 1 kg

## Inputs from nature
- Water, cooling, unspecified natural origin [natural resource, in water]: 0.0164 m3; lognormal variance with pedigree 0.0104, pedigree (2,3,2,4,3)
- Water, river [natural resource, in water]: 0.00086 m3; lognormal variance with pedigree 0.0104, pedigree (2,3,2,4,3)
- Water, well, in ground [natural resource, in water]: 0.00083 m3; lognormal variance with pedigree 0.0104, pedigree (2,3,2,4,3)

## Emissions to nature
- Ammonia [air, urban air close to ground]: 0.002224 kg; lognormal variance with pedigree 0.1786, pedigree (4,5,5,5,5)
- Nitrogen [air, unspecified]: 0.019 kg; lognormal variance with pedigree 0.0104, pedigree (2,3,2,4,3)
- Sulfur dioxide [air, urban air close to ground]: 0.008506 kg; lognormal variance with pedigree 0.1786, pedigree (4,5,5,5,5)
- Water [air, unspecified]: 0.00148179 m3; lognormal variance with pedigree 0.0104, pedigree (2,3,2,4,3)
- Ammonium [water, surface water]: 0.01557 kg; lognormal variance with pedigree 0.1786, pedigree (4,5,5,5,5)
- Chloride [water, surface water]: 0.03322 kg; lognormal variance with pedigree 0.3184, pedigree (4,5,5,5,5)
- Nitrate [water, surface water]: 0.06175 kg; lognormal variance with pedigree 0.1786, pedigree (4,5,5,5,5)
- Sodium I [water, surface water]: 0.02154 kg; lognormal variance with pedigree 0.6642, pedigree (4,5,5,5,5)
- Water [water, unspecified]: 0.0171635 m3; lognormal variance with pedigree 0.0104, pedigree (2,3,2,4,3)

## Sampling procedure
Literature data and stoechiometric calculations. Some values are calculated based on data from a large chemical factory located in Germany. For more details, see the comments of the exchanges.

## Extrapolations
This dataset has been copied from an original dataset covering the geography RER. The uncertainty has been adjusted accordingly.

## Review by Emilia Moreno Ruiz 2017-09-01
This dataset was additionally reviewed in a separate review process by Eric Johnson of Atlantic Consulting as well as Emilia Moreno Ruiz and Gregor Wernet of ecoinvent.
