# zineb production

Dataset: EcoSpold 2, unit process
Geography: GLO
Time period: 2021-01-01 to 2022-12-31
Technology level: current
Classification: ISIC rev.4 ecoinvent: 2011:Manufacture of basic chemicals
Synonyms: Dithiane Z-78; Aphytora; Amitan; Metiram; 1,2 ethanediylbis[dithiocarbamodithioato](2−) zinc; Polyram
Scenario: Business-as-Usual
System model: Allocation, cut-off by classification
Generated by: Daria Dellenbach
Database: ecoinvent
isCopyrightProtected: true
accessRestrictedTo: 1

## General comment
This dataset represents the production of 1 kg of zineb. Emissions are estimated. Energy consumptions, infrastructure and transports are calculated with standard values. A yield of 95% per chemical step was assumed.
Zineb is an organic substance with the CAS no.: 012122-67-7. It is called 'zinc ethane-1,2-diylbis(dithiocarbamate)' under IUPAC naming and its molecular formula is: C4H6N2S4Zn. It is solid under normal conditions of temperature and pressure as an offwhite to yellow powder which is insoluble in water and common organic solvents. It is modelled as a pure substance. Zineb is a fungicide used to control mildews and red fire disease in vines, lettuce spinach and many more vegetables. In addition, it can be applied to contron rusts in currants, fruit and vegetables and ornamentals. There are no publicly available information about the consumption of this substance on industrial sites.
Reference(s):
Rohe D.M.M., Wolf H.U., (2011). Zinc Compounds. in Ullmanns Encyclopedia of Industrial Chemistry, Weinheim, Wiley-VCH.
Unger T., (1996). Pesticide Synthesis Handbook, Noyes Publication.
Ackermann P., Margot P., Muller F., (2011): Fungicides, Agricultural, in Ullmann's Encyclopedia in Industrial Chemistry, Weinheim, Wiley-VCH.
Chemiepark GENDORF, Umwelterklärung 2016, https://www.gendorf.de/Nachbarn/Umweltschutz/Industrie%20und%20Nachhaltigkeit
Chemiepark GENDORF, Umwelterklärung 2017, https://www.gendorf.de/Nachbarn/Umweltschutz/Industrie%20und%20Nachhaltigkeit
Chemiepark GENDORF, Umwelterklärung 2020, https://www.gendorf.de/Nachbarn/Umweltschutz/Industrie%20und%20Nachhaltigkeit
Hischier, R. (2005) Establishing Life Cycle Inventories of Chemicals Based on Differing Data Availability (9 pp). The International Journal of Life Cycle Assessment, Volume 10, Issue 1, pp 59–67. 10.1065/lca2004.10.181.7

## Included activities start
Cradle to gate. The activity starts when the raw materials enter the process.

## Included activities end
Production of zineb production including materials, energy uses, infrastructure and emissions.

## Technology
This dataset represents the production of 1 kg of zineb.
Zineb is produced in two steps from ethylene diamine:
C2H8N2 + 2 CS2 + 2 NaOH → C4H6N2S4Na2 + 2 H2O
C4H6N2S4Na2 + ZnSO4 → C4H6N2S4Zn + Na2SO4
Reference(s):
Rohe D.M.M., Wolf H.U., (2011). Zinc Compounds. in Ullmanns Encyclopedia of Industrial Chemistry, Weinheim, Wiley-VCH.
Unger T., (1996). Pesticide Synthesis Handbook, Noyes Publication.
Ackermann P., Margot P., Muller F., (2011): Fungicides, Agricultural, in Ullmann's Encyclopedia in Industrial Chemistry, Weinheim, Wiley-VCH.

## Reference product
- zineb: 1 kg; By-product classification allocatable product; CPC 34662: Fungicides
  production volume 4 kg
  properties: carbon allocation 0.174245 kg, carbon content 0.174245, carbon content, fossil 0.174245, carbon content, non-fossil 0, dry mass 1 kg, price 5.86761 EUR2005, water content 0, water in wet mass 0 kg, wet mass 1 kg

## Inputs from technosphere
- carbon disulfide: 0.584901 kg; lognormal variance with pedigree 0.0098, pedigree (2,5,2,2,2)
  properties: carbon content, fossil 0.157895, dry mass 1 kg, heating value, net 32.72 MJ, wet mass 1 kg
- chemical factory, organics: 7.72e-10 unit; lognormal variance with pedigree 0.3492, pedigree (2,5,2,4,4)
- compressed air, 1000 kPa gauge: 0.2524, 0.620269 m3 (2 suppliers, which the file names only by identifier); sum of these 0.872669 m3; lognormal variance with pedigree 0.0498, pedigree (2,5,2,4,4)
- electricity, medium voltage: 0.770186 kWh; lognormal variance with pedigree 0.0498, pedigree (2,5,2,4,4)
- ethylenediamine: 0.185374, 0.0451907 kg (2 suppliers, which the file names only by identifier); sum of these 0.230565 kg; lognormal variance with pedigree 0.0098, pedigree (2,5,2,2,2)
  properties: carbon content, fossil 0.5, dry mass 1 kg, heating value, net 28.24 MJ, wet mass 1 kg
- heat, district or industrial, natural gas: 3.64094 MJ; lognormal variance with pedigree 0.0498, pedigree (2,5,2,4,4)
  properties: heating value, net 1 MJ
- heat, from steam, in chemical industry: 0.340942, 0.0601123 MJ (2 suppliers, which the file names only by identifier); sum of these 0.401054 MJ; lognormal variance with pedigree 0.0498, pedigree (2,5,2,4,4)
  properties: heating value, net 1 MJ
- nitrogen, liquid: 0.00615694, 0.0224302 kg (2 suppliers, which the file names only by identifier); sum of these 0.0285872 kg; lognormal variance with pedigree 0.0498, pedigree (2,5,2,4,4)
  properties: dry mass 1 kg, wet mass 1 kg
- sodium hydroxide, without water, in 50% solution state: 0.306891 kg; lognormal variance with pedigree 0.0098, pedigree (2,5,2,1,2)
  properties: dry mass 1 kg, heating value, net 3.03 MJ, wet mass 1 kg
- tap water: 0.043425 kg; lognormal variance with pedigree 0.0498, pedigree (2,5,2,4,4)
  properties: carbon content, fossil 0.00178991, dry mass 0.000337476 kg, water content 2962.17, wet mass 1 kg
- wastewater, average: -3.51938e-6, -1.25303e-8, -2.11495e-8, -8.41555e-7 m3 (4 suppliers, which the file names only by identifier); sum of these -4.39461e-6 m3; lognormal variance with pedigree 0.0498, pedigree (2,5,1,4,4)
  properties: carbon content, non-fossil 0.194039, dry mass 0.346837 kg, water content 2882.2, wet mass 1000 kg
- zinc monosulfate: 0.549732, 0.104063 kg (2 suppliers, which the file names only by identifier); sum of these 0.653795 kg; lognormal variance with pedigree 0.0098, pedigree (2,5,2,2,2)
  properties: dry mass 1 kg, wet mass 1 kg

## Inputs from nature
- Water, cooling, unspecified natural origin [natural resource, in water]: 0.0283845 m3; lognormal variance with pedigree 0.0498, pedigree (2,5,2,4,4)
- Water, river [natural resource, in water]: 0.00186328 m3; lognormal variance with pedigree 0.0498, pedigree (2,5,2,4,4)
- Water, well, in ground [natural resource, in water]: 0.00157588 m3; lognormal variance with pedigree 0.0498, pedigree (2,5,2,4,4)

## Emissions to nature
- Carbon dioxide, fossil [air, unspecified]: 0.105866 kg; lognormal variance with pedigree 0.0098, pedigree (2,5,2,2,2)
- Carbon disulfide [air, unspecified]: 0.000668458 kg; lognormal variance with pedigree 0.0492, pedigree (2,5,2,2,2)
- Nitrogen [air, unspecified]: 0.0285872 kg; lognormal variance with pedigree 0.0892, pedigree (2,5,2,4,4)
- Water [air, unspecified]: 0.0028371 m3; lognormal variance with pedigree 0.0892, pedigree (2,5,2,4,4)
- BOD5, Biological Oxygen Demand [water, unspecified]: 0.0140169 kg; lognormal variance with pedigree 0.0492, pedigree (2,5,2,2,2)
- COD, Chemical Oxygen Demand [water, unspecified]: 0.0140169 kg; lognormal variance with pedigree 0.0492, pedigree (2,5,2,2,2)
- DOC, Dissolved Organic Carbon [water, unspecified]: 0.00151927 kg; lognormal variance with pedigree 0.0492, pedigree (2,5,2,2,2)
- Sodium I [water, unspecified]: 0.175514 kg; lognormal variance with pedigree 0.0492, pedigree (2,5,2,2,2)
- Sulfate [water, unspecified]: 0.386965 kg; lognormal variance with pedigree 0.0492, pedigree (2,5,2,2,2)
- TOC, Total Organic Carbon [water, unspecified]: 0.00151927 kg; lognormal variance with pedigree 0.0492, pedigree (2,5,2,2,2)
- Water [water, unspecified]: 0.0291579 m3; lognormal variance with pedigree 0.0892, pedigree (2,5,2,4,4)
- Zinc II [water, unspecified]: 0.0251552 kg; lognormal variance with pedigree 0.6592, pedigree (2,5,2,2,2)

## Sampling procedure
Literature data and stoichiometric calculation. This inventory is partially based on a generic model of the production of chemicals. The data generated by this model have been improved with compound-specific data when available.
The model of the production of chemicals is using specific industry or literature data wherever possible and more generic data on chemical production processes to fill compound-specific data gaps when necessary. The basic principles of the model have been published in literature (Hischier, 2005). The model has been updated and extended with newly available data from the chemical industry.
In the model, unreacted fractions are treated in a waste treatment process, and emissions reported are after a waste treatment process that is included in the scope of this dataset. For volatile reactants, a small level of evaporation is assumed. Solvents and catalysts are mostly recycled in closed-loop systems within the scope of the dataset and reported flows are for losses from this system.
The main source of information for the values for heat, electricity, water (process and cooling), nitrogen, chemical factory is industry data from the GENDORF Chemical Park. The values are a 5-year average of data from 2015 to 2019 published by the GENDORF Chemical Park, which is based in Germany and produced an average of 2462760 tonnes of chemical substances in the years 2015-2019.

Reference(s):
Hischier, R. (2005) Establishing Life Cycle Inventories of Chemicals Based on Differing Data Availability (9 pp). The International Journal of Life Cycle Assessment, Volume 10, Issue 1, pp 59–67. 10.1065/lca2004.10.181.7
Chemiepark GENDORF, Umwelterklärung 2016, https://www.gendorf.de/Nachbarn/Umweltschutz/Industrie%20und%20Nachhaltigkeit
Chemiepark GENDORF, Umwelterklärung 2017, https://www.gendorf.de/Nachbarn/Umweltschutz/Industrie%20und%20Nachhaltigkeit
Chemiepark GENDORF, Umwelterklärung 2020, https://www.gendorf.de/Nachbarn/Umweltschutz/Industrie%20und%20Nachhaltigkeit
Rohe D.M.M., Wolf H.U., (2011). Zinc Compounds. in Ullmanns Encyclopedia of Industrial Chemistry, Weinheim, Wiley-VCH.
Unger T., (1996). Pesticide Synthesis Handbook, Noyes Publication.
Ackermann P., Margot P., Muller F., (2011): Fungicides, Agricultural, in Ullmann's Encyclopedia in Industrial Chemistry, Weinheim, Wiley-VCH.
