# eucalyptus seedling production, in heated greenhouse

Dataset: EcoSpold 2, unit process
Geography: RoW
Time period: 2010-01-01 to 2022-12-31
Technology level: current
Classification: ISIC rev.4 ecoinvent: 0130:Plant propagation
Scenario: Business-as-Usual
System model: Allocation, cut-off by classification
Generated by: Leticia De Santi Barrantes
Published in: Diogo Aparecido Lopes Silva 2013
Database: ecoinvent
isCopyrightProtected: true
accessRestrictedTo: 1

## General comment
The dataset refers to the production of 1000 Eucalyptus seedling. The dataset contains the production of Eucalyptus seedlings in a tree nursery for plantation in forests. The seedlings are produced in a heated greenhouse and wood wastes are bought for that. The final product is the seedlings planted in the substrate (as showed in the following picture) inside the polytubes where they are cultivated. Yield capacity is 1.3 million seedlings per month.
Source: EMBRAPA CNPTIA <http://www.agencia.cnptia.embrapa.br/gestor/eucalipto/arvore/CONTAG01_37_2572006132315.html>, access 02 mar 2016.
Polypropylene tubes with substrate are used to the cultivation and it can be reused for 6 to 8 years. However, the consumption of substrate is not included. The production steps are the following:
Source: USP <http://www.teses.usp.br/teses/disponiveis/88/88131/tde-31072012-121351/en.php>, access 02 mar 2016.
As data is from a LCA of MDP board production in Brazil, the original numbers had to be converted using the following information: kg of wood produce per seedling = 74.3 and kg of wood consumed to produce 1 m³ of MDP board = 687.

## Included activities start
This activity covers the water, fertilizers and pesticides consumed for cultivation of the seedlings, besides covers the transport of inputs inside the nursery by tractors and the electricity and wood wastes consumption to heat up the greenhouses.

## Included activities end
The activity ends with the seedlings ready to expedition. It does not includes the substrate and package boxes as source does not provide this information.

## Geography
The inventory is modelled for Brazil.

## Technology
Cultivation of Eucalyptus seedlings in heated greenhouse inside nurseries.

## Time period
Time period valid for the most data collected.

## Parameters
- Time: 0.25 year; name time; lognormal variance with pedigree 0.1306, pedigree (5,5,5,5,4)
  The life span takes 3 months.
- density, seedlings: 750 units/m²; name seedlings_m2; lognormal variance with pedigree 0.136, pedigree (5,5,5,5,4)
  Value extrapolated from "tree seedling" global dataset.
- diesel consumption per seedling: 0.0903 kg/seedling; name diesel_consumption; lognormal variance with pedigree 0.136, pedigree (5,5,5,5,4)
  Diesel consumed in tractors to transport inputs inside the nursery.
- evapotranspiration rate: 0.2941 dimensionless; name e_rate; lognormal variance with pedigree 0.1306, pedigree (5,5,5,5,4)
  This parameter is related to the evapotranspiration that happens during the production of tree seedling, according to the experiment conducted by Oliveira (2012.
  OLIVEIRA, Aline Santana. Otimização do uso da água na produção de mudas clonais de Eucalyptus. 2012. PhD Thesis. Federal University of Viçosa <http://www.tede.ufv.br/tedesimplificado/tde_arquivos/24/TDE-2012-08-28T072515Z-3888/Publico/texto%20completo.pdf>.
- weight_seedling: 0.0557 kg; lognormal variance with pedigree 0.1306, pedigree (5,5,5,5,4)
  Weight of one seedling in the substrate inside the polytube.
- wood density, dry: 474 kg/m3; name dry_wood_d; lognormal variance with pedigree 0.1306, pedigree (5,5,5,5,4)
  Wood density. From Silva et al. (2013).
- wood residues as fuel: 0.019468 kg; name amountWoodChips; lognormal variance with pedigree 0.1306, pedigree (5,5,5,5,4)
  Amount of wood waste consumed to heat up the greenhouse inside the nursery.

## Reference product
- eucalyptus seedling, for planting: 1 unit; By-product classification allocatable product; CPC 01961: Live plants; bulbs, tubers and roots; cuttings and slips; mushroom spawn
  production volume 54886.8 unit
  properties: carbon allocation 0.2964 kg, carbon content 0.494, carbon content, fossil 0, carbon content, non-fossil 0.494, dry mass 0.6 kg, price 2.8945 EUR2005, water content 0.666667, water in wet mass 0.4 kg, wet mass 1 kg

## Inputs from technosphere
- ammonium sulfate: 5.96848e-6, 1.83152e-6 kg (2 suppliers, which the file names only by identifier); sum of these 7.8e-6 kg; lognormal variance with pedigree 0.0032, pedigree (2,4,2,5,1)
  properties: dry mass 1 kg, wet mass 1 kg
- electricity, medium voltage: 5.36763e-6, 8.37526e-7, 2.45189e-6, 1.18156e-5, 0.00022277, 2.55105e-6, 0.000728442, 1.75684e-7, 4.2063e-6, 1.29127e-6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 kWh (30 suppliers, which the file names only by identifier); sum of these 0.00541667 kWh; lognormal variance with pedigree 0.0039, pedigree (2,4,2,3,2)
- extrusion, plastic pipes: 0.0005595 kg
- glyphosate: 1.536e-5 kg; lognormal variance with pedigree 0.0039, pedigree (2,4,2,3,2)
  properties: carbon content, fossil 0.214286, dry mass 1 kg, wet mass 1 kg
- greenhouse, plastic walls and roof: 0.000333333 m2*year; lognormal variance with pedigree 0.51, pedigree (5,5,5,5,5)
- inorganic phosphorus fertiliser, as P2O5: 4.17501e-7, 2.62757e-7, 1.36869e-7, 1.8656e-7, 3.50057e-6, 3.21795e-7, 3.84203e-7, 1.73027e-7, 1.9943e-7, 6.93536e-8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 kg (29 suppliers, which the file names only by identifier); sum of these 4.3e-5 kg; lognormal variance with pedigree 0.0032, pedigree (2,4,2,5,1)
  properties: dry mass 1 kg, wet mass 1 kg
- irrigation: 9.28487e-7, 1.91038e-6, 0.000141327, 0.000265298, 1.37765e-5, 2.48945e-6, 1.39684e-8, 5.56986e-7, 2.71665e-6, 5.43124e-7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 m3 (16 suppliers, which the file names only by identifier); sum of these 0.00054078 m3; lognormal variance with pedigree 0.0032, pedigree (2,4,2,5,1)
  properties: dry mass 0.11 kg, water content 9089.91, wet mass 1000 kg
- packaging, for fertilisers: 0.0006436 kg; lognormal variance with pedigree 0.0512, pedigree (4,3,2,5,4)
  properties: carbon content, fossil 0.825301, dry mass 1 kg, heating value, net 25.01 MJ, price 0.0642 EUR2005, wet mass 1 kg
- packaging, for pesticides: 3.072e-5 kg; lognormal variance with pedigree 0.0512, pedigree (4,3,2,5,4)
  properties: carbon content, fossil 0.85714, dry mass 1 kg, heating value, net 25.97 MJ, price 0.0642 EUR2005, wet mass 1 kg
- polypropylene, granulate: 0.0005573 kg; lognormal variance with pedigree 0.235, pedigree (5,5,5,5,5)
  properties: carbon content, fossil 0.857143, dry mass 1 kg, heating value, net 32.78 MJ, wet mass 1 kg
- potassium chloride: 3.28507e-5, 0.000396114 kg (2 suppliers, which the file names only by identifier); sum of these 0.000428965 kg; lognormal variance with pedigree 0.0032, pedigree (2,4,2,5,1)
  properties: dry mass 1 kg, wet mass 1 kg
- transport, tractor and trailer, agricultural: 0.00206271, 8.38796e-6 metric ton*km (2 suppliers, which the file names only by identifier); sum of these 0.0020711 metric ton*km; lognormal variance with pedigree 0.1226, pedigree (2,4,2,5,1)
- waste polypropylene: -1.92153e-6, -0.000487429, -4.65222e-6, -6.03447e-5, -7.76278e-7, -3.5184e-7, -1.82468e-6 kg (7 suppliers, which the file names only by identifier); sum of these -0.0005573 kg; lognormal variance with pedigree 0.2106, pedigree (5,5,5,5,5)
  properties: carbon content, fossil 0.825208, dry mass 0.841 kg, heating value, net 32.78 MJ, water content 0.189061, wet mass 1 kg
- wood ash mixture, pure: -0.00105291, -1.03803e-5, -0.000504967 kg (3 suppliers, which the file names only by identifier); sum of these -0.00156825 kg; lognormal variance with pedigree 0.1306, pedigree (5,5,5,5,4)
  properties: carbon content, non-fossil 0.012, dry mass 1 kg, wet mass 1 kg
- wood chips, dry, measured as dry mass: 0.00387427, 0.0155937 kg (2 suppliers, which the file names only by identifier); sum of these 0.019468 kg; lognormal variance with pedigree 0.1306, pedigree (5,5,5,5,4)
  properties: carbon content, non-fossil 0.494, dry mass 1 kg, heating value, net 9.99 MJ, water content 0.4, wet mass 1.4 kg

## Inputs from nature
- Carbon dioxide, in air [natural resource, in air]: 1.0868 kg; lognormal variance with pedigree 0.1306, pedigree (5,5,5,5,4)
- Occupation, industrial area [natural resource, land]: 0.000333333 m2*year; lognormal variance with pedigree 0.132, pedigree (5,5,5,5,4)
- Transformation, from industrial area [natural resource, land]: 0.00133333 m2; lognormal variance with pedigree 0.138, pedigree (5,5,5,5,4)
- Transformation, to industrial area [natural resource, land]: 0.00133333 m2; lognormal variance with pedigree 0.138, pedigree (5,5,5,5,4)

## Emissions to nature
- Ammonia [air, unspecified]: 5.51e-6 kg; lognormal variance with pedigree 0.138, pedigree (5,5,5,5,4)
- Carbon dioxide, non-fossil [air, unspecified]: 0.0137357 kg; lognormal variance with pedigree 0.1306, pedigree (5,5,5,5,4)
- Carbon monoxide, non-fossil [air, unspecified]: 4.23969e-5 kg; lognormal variance with pedigree 0.78, pedigree (5,5,5,5,4)
- Glyphosate [air, non-urban air or from high stacks]: 1.417e-5 kg; lognormal variance with pedigree 0.17, pedigree (5,5,5,5,4)
- Nitrogen oxides [air, unspecified]: 1.7134e-5 kg; lognormal variance with pedigree 0.16, pedigree (5,5,5,5,4)
- Particulate Matter, < 2.5 um [air, unspecified]: 3.52586e-5 kg; lognormal variance with pedigree 0.43, pedigree (5,5,5,5,4)
- Sulfur dioxide [air, unspecified]: 1.76e-6 kg; lognormal variance with pedigree 0.78, pedigree (5,5,5,5,4)
- Water [air, unspecified]: 0.000159043 m3; lognormal variance with pedigree 0.1306, pedigree (5,5,5,5,4)
- Ammonium sulfate [water, unspecified]: 7.34e-6 kg; lognormal variance with pedigree 0.17, pedigree (5,5,5,5,4)
- Glyphosate [water, unspecified]: 1.73e-6 kg; lognormal variance with pedigree 0.17, pedigree (5,5,5,5,4)
- Phosphate [water, surface water]: 3.68e-6 kg; lognormal variance with pedigree 0.17, pedigree (5,5,5,5,4)
- Water [water, unspecified]: 0.000381337 m3; lognormal variance with pedigree 0.1306, pedigree (5,5,5,5,4)

## Sampling procedure
The majority of data came from a published source "Life cycle assessment of medium density particleboard (MDP) produced in Brazil" (Silva et al., 2013). Additional and necessary data were collected in the literature.

## Extrapolations
Occupation rate was extrapolated from the glogal dataset.
