# phosphorus oxychloride production, from phosphorus trichloride

Dataset: EcoSpold 2, unit process
Geography: RoW
Time period: 2000-01-01 to 2022-12-31
Technology level: current
Classification: ISIC rev.4 ecoinvent: 2011:Manufacture of basic chemicals
Synonyms: Phosphoric trichloride; Phosphoroyl trichloride; 10025-87-3; Phosphoryl trichloride; PHOSPHORUS OXYCHLORIDE
Scenario: Business-as-Usual
System model: Allocation, cut-off by classification
Share of production covered: 100 %
Generated by: Jürgen Sutter
Published in: Jungbluth, N. 2007
Database: ecoinvent
isCopyrightProtected: true
accessRestrictedTo: 1

## General comment
This dataset represents the production of 1 kg of phosphoryl chloride by oxidation of phosphorus trichloride. Phosphoryl chloride is a colorless liquid which fumes in air and has a pungent odor. It is an ionizing solvent which is used on a large scale to produce phosphate esters by reaction with alcohols and phenols.
This dataset is based on stoichiometric calculations as well as estimations based on data from a large chemical factory (Gendorf 2016).
References:
Bettermann, G., Krause, W., Riess, G. and Hofmann, T. 2000. Phosphorus Compounds, Inorganic. Ullmann's Encyclopedia of Industrial Chemistry.
Gendorf (2016) Umwelterklärung 2015, Werk Gendorf Industriepark, www.gendorf.de.

## Included activities start
From the reception of phosphorus trichloride and oxygen at the factory gate.

## Included activities end
This activity ends with the production of phosphoryl chloride including materials, energy uses, infrastructure and emissions.

## Geography
The inventory is modelled for Europe but is assumed to be representative of the global production. Some values are based on data from a large chemical factory located in Germany. These are assumed to be valid for this geography.

## Technology
Phosphoryl chloride is obtained by oxidizing phosphorus trichloride with air or oxygen.
It can be produced industrially either batchwise or in a continuous process. A finely divided stream of oxygen is reacted with phosphorus trichloride until the freezing point of the product is 1 °C. The reaction is accelerated by carrying it out under pressure. The presence of orthophosphoric acid has a catalytic effect, but traces of metallic impurities such as copper and cobalt, or of sulfur compounds, decrease the reaction rate. In a Hoechst process, phosphorus trichloride and oxygen are passed in cocurrent through a stainless steel water-cooled packed column. The oxidation process, i.e., the uptake of oxygen, can be followed by the characteristic temperature changes. The first product, which leaves the column at a maximum temperature of 35 °C, has a freezing point of ca. 0.9 °C, and is taken from the top of the column into a second column where it is again treated with oxygen. This procedure avoids large temperature increases. The excess oxygen leaving the plant passes through a cold trap where entrained phosphoryl chloride is condensed out and recovered. The off-gas is then scrubbed with water. Commercial phosphoryl chloride contains ca. 99.5 % POCl3 and traces of phosphorus trichloride.
Bettermann, G., Krause, W., Riess, G., Hofmann, T.: Phosphorus Compounds, Inorganic Published online: 2000. In: Ullmann's Encyclopedia of Industrial Chemistry, Seventh Edition, 2004 Electronic Release (ed. Fiedler E., Grossmann G., Kersebohm D., Weiss G. and Witte C.). 7 th Electronic Release Edition. Wiley InterScience, New York, Online-Version under: http://www.mrw.interscience.wiley.com/emrw/9783527306732/home

## Time period
Time of publications. Some values are based on data published by the Gendorf factory that were collected between 2011 and 2015. The time period has been adjusted accordingly. For more details, see the comments of the exchanges.

## Reference product
- phosphorus oxychloride: 1 kg; By-product classification allocatable product; CPC 34231: Chemical elements n.e.c.; inorganic acids except phosphoric, nitric and sulphonitric; inorganic oxygen compoun[…]
  production volume 1.652e8 kg
  properties: carbon allocation 0 kg, carbon content 0, carbon content, fossil 0, carbon content, non-fossil 0, dry mass 1 kg, price 1.86468 EUR2005, water content 0, water in wet mass 0 kg, wet mass 1 kg

## Inputs from technosphere
- chemical factory, organics: 4e-10 unit; lognormal variance with pedigree 0.3098, pedigree (2,3,2,4,3)
- electricity, medium voltage: 0.0295802, 0.0148452, 0.271401, 0.0044947, 0.000880897, 0.0947985 kWh (6 suppliers, which the file names only by identifier); sum of these 0.416 kWh; lognormal variance with pedigree 0.0104, pedigree (2,3,2,4,3)
- nitrogen, liquid: 0.019 kg; lognormal variance with pedigree 0.0104, pedigree (2,3,2,4,3)
  properties: dry mass 1 kg, wet mass 1 kg
- oxygen, liquid: 0.1108 kg; lognormal variance with pedigree 0.038, pedigree (4,5,2,5,1)
  properties: dry mass 1 kg, wet mass 1 kg
- phosphorous chloride: 0.94183 kg; lognormal variance with pedigree 0.038, pedigree (4,5,2,5,1)
  properties: dry mass 1 kg, wet mass 1 kg
- tap water: 0.00203022, 0.000150233, 0.0232328, 0.000404717, 4.8717e-5, 8.05128e-5, 5.28156e-5 kg (7 suppliers, which the file names only by identifier); sum of these 0.026 kg; lognormal variance with pedigree 0.0104, pedigree (2,3,2,4,3)
  properties: carbon content, fossil 0.00178991, dry mass 0.000337476 kg, water content 2962.17, wet mass 1 kg
- wastewater, average: -2.69042e-6, -9.57892e-9 m3 (2 suppliers, which the file names only by identifier); sum of these -2.7e-6 m3; lognormal variance with pedigree 0.0104, pedigree (2,3,1,4,3)
  properties: carbon content, non-fossil 0.194039, dry mass 0.346837 kg, water content 2882.2, wet mass 1000 kg

## Inputs from nature
- Water, cooling, unspecified natural origin [natural resource, in water]: 0.0164 m3; lognormal variance with pedigree 0.0104, pedigree (2,3,2,4,3)
- Water, river [natural resource, in water]: 0.00086 m3; lognormal variance with pedigree 0.0104, pedigree (2,3,2,4,3)
- Water, well, in ground [natural resource, in water]: 0.00083 m3; lognormal variance with pedigree 0.0104, pedigree (2,3,2,4,3)

## Emissions to nature
- Nitrogen [air, unspecified]: 0.019 kg; lognormal variance with pedigree 0.0104, pedigree (2,3,2,4,3)
- Water [air, unspecified]: 0.0014 m3; lognormal variance with pedigree 0.0104, pedigree (2,3,2,4,3)
- Chloride [water, surface water]: 0.036357 kg; lognormal variance with pedigree 0.448, pedigree (4,5,5,5,5)
- Phosphorus [water, surface water]: 0.010734 kg; lognormal variance with pedigree 0.188, pedigree (4,5,5,5,5)
- Water [water, unspecified]: 0.0167 m3; lognormal variance with pedigree 0.0104, pedigree (2,3,2,4,3)

## Sampling procedure
Literature data and stoechiometric calculations. Some values are calculated based on data from a large chemical factory located in Germany. For more details, see the comments of the exchanges.

## Extrapolations
This dataset has been copied from an original dataset covering the geography RER. The uncertainty has been adjusted accordingly.

## Review by Gregor Wernet 2017-08-04
This dataset was additionally reviewed in a separate review process by Eric Johnson of Atlantic Consulting as well as Emilia Moreno Ruiz and Gregor Wernet of ecoinvent.
