# treatment of waste polyethylene terephthalate, for recycling, unsorted, sorting

Dataset: EcoSpold 2, unit process
Geography: Europe without Switzerland
Time period: 2010-01-01 to 2022-12-31
Technology level: current
Classification: ISIC rev.4 ecoinvent: 3811:Collection of non-hazardous waste
Scenario: Business-as-Usual
System model: Allocation, cut-off by classification
Generated by: Thomas Kägi
Published in: Kägi T. 2017
Database: ecoinvent
isCopyrightProtected: true
accessRestrictedTo: 1

## General comment
The functional unit represents the treatment of unsorted waste polyethylene terephthalate, for recycling, yielding 1 kg of sorted waste polyethylene terephthalate, for recycling.
Once the postconsumer PET has been collected, they must be separated from other co-collected materials and plastics. Although some recovered plastic is separated by curbside sorting and the use of separate bins at drop-off recycling centers, sorting and separation of plastics most commonly takes place at material recovery facilities (MRFs). Sorting operations at MRFs range from manual sorting of items on a conveyor to highly automated systems using magnets, air classifiers, optical sorters, and other technologies to sort and separate mixed incoming materials. Postconsumer plastics may be separated and baled as mixed plastics, or the facility may have the capability to further sort down to individual resin bales.

## Included activities start
Service is starting with the receipt of unsorted waste PET

## Included activities end
This module includes all processes of the sorting of waste PET up to the factory gate. Machinery infrastructure is excluded

## Allocation
no allocation involved

## Reference product
- waste polyethylene terephthalate, for recycling, sorted: 1 kg; By-product classification Recyclable; CPC 39270: Waste, parings and scrap of plastics; lognormal variance with pedigree 0.0006, pedigree (1,1,1,1,1)
  production volume 3.125e9 kg
  properties: carbon allocation 0.615264 kg, carbon content 0.624, carbon content, fossil 0.624, carbon content, non-fossil 0, dry mass 0.986 kg, heating value, net 22.95 MJ, price 0.035 EUR2005, water content 0.0141988, water in wet mass 0.014 kg, wet mass 1 kg

## Inputs from technosphere
- diesel, burned in building machine: 0.0714052 MJ; lognormal variance with pedigree 0.0412, pedigree (1,1,4,4,4)
  properties: heating value, net 1 MJ
- electricity, low voltage: 0.0177226 kWh; lognormal variance with pedigree 0.002, pedigree (2,1,5,4,1)
- heat, district or industrial, natural gas: 6.71723e-8 MJ; lognormal variance with pedigree 0.002, pedigree (2,1,5,4,1)
  properties: heating value, net 1 MJ
- municipal solid waste: -0.0952903 kg; lognormal variance with pedigree 0.0018, pedigree (2,1,1,4,1)
  properties: carbon content, fossil 0.171549, carbon content, non-fossil 0.261655, dry mass 0.771 kg, heating value, net 11.74 MJ, water content 0.297017, wet mass 1 kg
- propane, burned in building machine: 0.000252438 MJ; lognormal variance with pedigree 0.002, pedigree (2,1,5,4,1)
  properties: heating value, net 1 MJ
- steel, low-alloyed: 0.00866819 kg; lognormal variance with pedigree 0.0567, pedigree (4,5,4,3,4)
  properties: carbon content, fossil 0.005, dry mass 1 kg, wet mass 1 kg
- waste polyethylene terephthalate, for recycling, unsorted: 1.09529 kg
  properties: carbon content, fossil 0.601, dry mass 0.968 kg, heating value, net 22.95 MJ, price 0.0315 EUR2005, water content 0.0330579, wet mass 1 kg
- waste preparation facility: 2.16685e-9 unit; lognormal variance with pedigree 0.1692, pedigree (5,1,5,4,5)
  properties: lifetime 50 year, lifetime capacity [kg] 5e8 kg
- wire drawing, steel: 0.00866819 kg; lognormal variance with pedigree 0.0567, pedigree (4,5,4,3,4)

## Sampling procedure
Uncertainty estimation according to the pedigree matrix

## Extrapolations
Energy demand and auxiliary materials of recycling process was extrapolated from PET sorting in the USA.
