# wastewater treatment facility construction, capacity 1.6E8l/year

Dataset: EcoSpold 2, unit process
Geography: RoW
Time period: 1996-01-01 to 2022-12-31
Technology level: current
Classification: ISIC rev.4 ecoinvent: 4220:Construction of utility projects
Classification: EcoSpold01Categories: waste management/wastewater treatment
Synonyms: municipal WWTP infrastructure capacity class 5
Tags: ConvertedDataset
Scenario: Business-as-Usual
System model: Allocation, cut-off by classification
Generated by: Gabor Doka (obsolete)
Published in: Doka G. 2007
Database: ecoinvent
isCopyrightProtected: true
accessRestrictedTo: 1

## General comment
For municipal wastewater treatment plant capacity class 5 with an average per-captia equivalent PCE (Einwohnergleichwert) of 806 and an average annual sewage volume of 163'000 m3/a. A lifetime of 30 years is assumed.
[This dataset was already contained in the ecoinvent database version 2. It was not individually updated during the transfer to ecoinvent version 3. Life Cycle Impact Assessment results may still have changed, as they are affected by changes in the supply chain, i.e. in other datasets. This dataset was generated following the ecoinvent quality guidelines for version 2. It may have been subject to central changes described in the ecoinvent version 3 change report (http://www.ecoinvent.org/database/ecoinvent-version-3/reports-of-changes/), and the results of the central updates were reviewed extensively. The changes added e.g. consistent water flows and other information throughout the database. The documentation of this dataset can be found in the ecoinvent reports of version 2, which are still available via the ecoinvent website. The change report linked above covers all central changes that were made during the conversion process.]

## Included activities end
Infrastructure materials for municipal wastewater treatment plant, transports, dismantling. Land use burdens.

## Geography
Specific to the technology mix encountered in Switzerland in 2000. Well applicable to modern treatment practices in Europe, North America or Japan.

## Technology
Three stage wastewater treatment (mechanical, biological, chemical) including sludge digestion (fermentation) according to the average technology in Switzerland

## Parameters
- fraction, process water, to air: 0.15 dimensionless; lognormal variance with pedigree 0.092025, pedigree (4,4,3,2,4)
- fraction, tap water, to air: 0.15 dimensionless; lognormal variance with pedigree 0.092025, pedigree (4,4,3,2,4)

## Reference product
- wastewater treatment facility, capacity 1.6E8l/year: 1 unit; By-product classification allocatable product; CPC 53253: Sewage and water treatment plants
  production volume 3.96633 unit
  properties: carbon allocation 0 kg, carbon content 0, price 3.72e6 EUR2005

## Inputs from technosphere
- aluminium, cast alloy: 1140 kg; lognormal variance with pedigree 0.3023, pedigree (1,2,5,5,1)
  properties: dry mass 1 kg, wet mass 1 kg
- chemical, inorganic: 652 kg; lognormal variance with pedigree 0.3023, pedigree (1,2,5,5,1)
  properties: carbon content, fossil 0.003, dry mass 1 kg, wet mass 1 kg
- chemical, organic: 5320 kg; lognormal variance with pedigree 0.3023, pedigree (1,2,5,5,1)
  properties: carbon content, fossil 0.628, dry mass 1 kg, heating value, net 19.03 MJ, wet mass 1 kg
- concrete, medium strength: 1310 m3; lognormal variance with pedigree 0.3023, pedigree (1,2,5,5,1)
  properties: dry mass 2190 kg, water content 0.086758, wet mass 2380 kg
- copper, cathode: 1210 kg; lognormal variance with pedigree 0.3023, pedigree (1,2,5,5,1)
  properties: dry mass 1 kg, wet mass 1 kg
- electricity, medium voltage: 1.99698, 2.93616, 1.47355, 26.9395, 0.446148, 0.0874387, 6.41047, 9.40979 kWh (8 suppliers, which the file names only by identifier); sum of these 49.7 kWh; lognormal variance with pedigree 0.3023, pedigree (1,2,5,5,1)
- excavation, hydraulic digger: 4560 m3; lognormal variance with pedigree 0.3023, pedigree (1,2,5,5,1)
- extrusion, plastic film: 3230 kg; lognormal variance with pedigree 0.3023, pedigree (1,2,5,5,1)
- glass fibre: 2570 kg; lognormal variance with pedigree 0.3023, pedigree (1,2,5,5,1)
  properties: dry mass 1 kg, wet mass 1 kg
- limestone, crushed, washed: 28100 kg; lognormal variance with pedigree 0.3023, pedigree (1,2,5,5,1)
  properties: carbon content, fossil 0.117257, dry mass 0.998 kg, water content 0.00200401, wet mass 1 kg
- pitch: 3.48251, 99.8109, 1.7166, 30.1201, 77.6928, 439.205, 4.97162 kg (7 suppliers, which the file names only by identifier); sum of these 657 kg; lognormal variance with pedigree 0.3023, pedigree (1,2,5,5,1)
  properties: carbon content, fossil 0.83, dry mass 1 kg, heating value, net 28 MJ, wet mass 1 kg
- polyethylene, high density, granulate: 3210 kg; lognormal variance with pedigree 0.3023, pedigree (1,2,5,5,1)
  properties: carbon content, fossil 0.857143, dry mass 1 kg, heating value, net 42.47 MJ, wet mass 1 kg
- polyethylene, low density, granulate: 21.1 kg; lognormal variance with pedigree 0.3023, pedigree (1,2,5,5,1)
  properties: carbon content, fossil 0.857143, dry mass 1 kg, heating value, net 42.47 MJ, wet mass 1 kg
- reinforcing steel: 102000 kg; lognormal variance with pedigree 0.3023, pedigree (1,2,5,5,1)
  properties: carbon content, fossil 0.004, dry mass 1 kg, wet mass 1 kg
- steel, chromium steel 18/8, hot rolled: 8160 kg; lognormal variance with pedigree 0.3023, pedigree (1,2,5,5,1)
  properties: carbon content, fossil 0.0008, dry mass 1 kg, wet mass 1 kg
- stone wool, packed: 1150 kg; lognormal variance with pedigree 0.3023, pedigree (1,2,5,5,1)
  properties: carbon content, fossil 0.015401, dry mass 1 kg, wet mass 1 kg
- synthetic rubber: 1160 kg; lognormal variance with pedigree 0.3023, pedigree (1,2,5,5,1)
  properties: carbon content, fossil 0.871949, dry mass 1 kg, heating value, net 26.42 MJ, wet mass 1 kg
- tap water: 7499.82, 554.976, 85824.3, 1495.06, 179.966, 297.423, 63953.3, 195.106 kg (8 suppliers, which the file names only by identifier); sum of these 160000 kg; lognormal variance with pedigree 0.3023, pedigree (1,2,5,5,1)
  properties: carbon content, fossil 0.00178991, dry mass 0.000337476 kg, water content 2962.17, wet mass 1 kg
- waste bitumen sheet: -657 kg; lognormal variance with pedigree 0.3023, pedigree (1,2,2,5,1)
  properties: carbon content, fossil 0.643207, dry mass 0.985 kg, heating value, net 40.2 MJ, water content 0.0152284, wet mass 1 kg
- waste mineral wool: -1078.93, -2631.07 kg (2 suppliers, which the file names only by identifier); sum of these -3710 kg; lognormal variance with pedigree 0.3023, pedigree (1,2,2,5,1)
  properties: dry mass 1 kg, wet mass 1 kg
- waste polyethylene/polypropylene product: -1241.82, -3148.18 kg (2 suppliers, which the file names only by identifier); sum of these -4390 kg; lognormal variance with pedigree 0.3023, pedigree (1,2,2,5,1)
  properties: carbon content, fossil 0.748045, dry mass 0.847 kg, heating value, net 42.47 MJ, water content 0.180638, wet mass 1 kg
- waste reinforced concrete: -2.78487e6, -195132 kg (2 suppliers, which the file names only by identifier); sum of these -2.98e6 kg; lognormal variance with pedigree 0.3023, pedigree (1,2,2,5,1)
  properties: dry mass 0.99418 kg, water content 0.00585407, wet mass 1 kg

## Inputs from nature
- Occupation, construction site [natural resource, land]: 806 m2*year; lognormal variance with pedigree 0.0432, pedigree (2,3,5,5,1)
- Occupation, industrial area [natural resource, land]: 24200 m2*year; lognormal variance with pedigree 0.0432, pedigree (2,3,5,5,1)
- Transformation, from pasture, man made [natural resource, land]: 806 m2; lognormal variance with pedigree 0.1232, pedigree (2,3,5,5,1)
- Transformation, to industrial area [natural resource, land]: 806 m2; lognormal variance with pedigree 0.1232, pedigree (2,3,5,5,1)

## Emissions to nature
- Water [air, unspecified]: 24 m3; lognormal variance with pedigree 0.0427, pedigree (2,2,5,5,1)
- Water [water, unspecified]: 136 m3; lognormal variance with pedigree 0.0427, pedigree (2,2,5,5,1)

## Sampling procedure
data from literature

## Extrapolations
data from three Swiss WWTP, linearily extrapolated according to capacity class. This dataset has been copied from an original dataset covering the geography CH. The uncertainty has been adjusted accordingly.

## Review by Niels Jungbluth 2003-06-18
Passed.
