# NMC111 oxide production, for Li-ion battery

Dataset: EcoSpold 2, unit process
Geography: RoW
Time period: 2018-01-01 to 2022-12-31
Technology level: current
Classification: ISIC rev.4 ecoinvent: 2011:Manufacture of basic chemicals
Synonyms: NMC333 oxide; nickel-manganese-cobalt oxide; nickel manganese cobalt 111 oxide
Scenario: Business-as-Usual
System model: Allocation, cut-off by classification
Generated by: Eleonora Crenna
Published in: Dai, Q. 2019
Database: ecoinvent
isCopyrightProtected: true
accessRestrictedTo: 1

## General comment
This dataset represents the production of 1 kg nickel manganese cobalt (NMC) oxide, used as active material in the production NMC111 cathodes in Li-ion batteries. This dataset is a copy of the corresponding regional dataset. Production volume was adjusted.

## Included activities start
The activity starts when NMC111 hydroxide and other chemicals enter the process at the factory.

## Included activities end
The activity ends with the production at factory gate of NMC111 oxide via calcination process.

## Geography
This dataset is considered representative of the global situation. It is based on data from the geography China, which is the leader country of Li-ion battery material production.

## Technology
NMC111 oxide is produced through a multi-step calcination process. NMC111 hydroxide and lithium carbonate are mixed and heated in the calcination kiln over two rounds of mixing and calcination. Finally, the resulting material is crushed, sieved and demagnetized to obtain NMC111 oxide. The production process is completely automated and almost all electricity consumption is attributed to the calcination kiln. The facility can achieve an overall material efficiency of approximately100%.
Thegeneral reaction is the following:
NMC(OH)2 + Li2CO3 --> Li-NMC-O2 + CO2 + H2O.
Reference:
Dai, Q., Kelly, J. C., Dunn, J., & Benavides, P. (2018). Update of Bill-of-Materials and Cathode Materials Production for Lithium-Ion Batteries in the GREET Model. 2018. Argonne National Laboratory.

## Time period
The time period is from 2018 (year of the publication of data) and 2020 (year of the dataset)

## Reference product
- NMC111 oxide: 1 kg; By-product classification allocatable product; CPC 34220: Zinc oxide; zinc peroxide; chromium oxides and hydroxides; manganese oxides; iron oxides and hydroxides; earth[…]
  production volume 6.30523e7 kg
  properties: carbon allocation 0 kg, carbon content 0, carbon content, fossil 0, carbon content, non-fossil 0, dry mass 1 kg, price 19.09 EUR2005, water content 0, water in wet mass 0 kg, wet mass 1 kg

## Inputs from technosphere
- NMC111 hydroxide: 0.949 kg; lognormal variance with pedigree 0.0038, pedigree (2,3,2,5,1)
  properties: dry mass 1 kg, heating value, net 2.66 MJ, wet mass 1 kg
- chemical factory, organics: 7.41e-10 unit; lognormal variance with pedigree 0.3052, pedigree (3,3,2,5,2)
- electricity, medium voltage: 0.00601919, 0.00261977, 0.350004, 0.542373, 0.00569816, 0.00872186, 0.400831, 0.00332637, 1.31069, 0.0924485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 kWh (46 suppliers, which the file names only by identifier); sum of these 6.8737 kWh; lognormal variance with pedigree 0.0038, pedigree (2,3,2,5,1)
- lithium carbonate: 0.383 kg; lognormal variance with pedigree 0.0038, pedigree (2,3,2,5,1)
  properties: carbon content, fossil 0.16255, dry mass 1 kg, heating value, net 4.93 MJ, wet mass 1 kg

## Emissions to nature
- Carbon dioxide, fossil [air, unspecified]: 0.207 kg; lognormal variance with pedigree 0.0038, pedigree (2,3,2,5,1)
- Water [air, non-urban air or from high stacks]: 0.000125044 m3; lognormal variance with pedigree 0.25, pedigree (5,5,5,5,5)

## Sampling procedure
The data about the production process of NMC111 oxide are retrieved from the literature (see published source field). The value of water emissions is calculated to obtain mass balance; the value of infrastructure is calculated as representative of the production site.

## Extrapolations
The dataset is extrapolated from CN data; the uncertainty has been adjusted accordingly.
