# reeled raw silk hank production

Dataset: EcoSpold 2, unit process
Geography: RoW
Time period: 2015-04-01 to 2022-03-31
Technology level: current
Classification: EcoSpold01Categories: textiles/processing
Classification: ISIC rev.4 ecoinvent: 1311:Preparation and spinning of textile fibres
Scenario: Business-as-Usual
System model: Allocation, cut-off by classification
Generated by: [System]
Published in: Faist Emmenegger, M. 2018
Database: ecoinvent
isCopyrightProtected: true
accessRestrictedTo: 1

## General comment
Inventory refers to production of 1 kg raw silk. This dataset is a copy of Indian dataset.
This dataset represents the production of 1 kg reeled silk from 8 kg cocoon input. Government operated Silk reeling centres are operating in various districts of the Central Indian region. It is promoted as a local revenue source for government and employment for the women. Cocoons are delivered from cocoon banks to reeling centres which usually operate on 10 basin reeling unit. These centres are usually adjoining mulberry gardens and silk worm rearing centres.
On receiving the cocoons are first dried in electric ovens of capacity 50 kg. the cocoons are dried fist at 120˚C and gradually decreasing to……. over 5-6 hours.
The dried cocoons are then immersed in hot water and transferred to 10 basin reeling unit. Ends are brushed and reeled on spools and re-reeled into hanks of 70 gm each.
Total water requirement of cooking and reeling is 0.16 m3/kg raw silk, electricity requirement 3.39 kWh/ kg raw silk, fuelwood requirement (Acasia), 16 kg with an energy input of 312.8 MJ/kg raw silk. Waste silk is sold for reuse in silk carpet industry and other waste is sold in pharma, oil and other industry. Waste water from cooking and reeling goes to adjoining mulberry fields as it is rich in proteins. Electricity is generally solar based and reeling units have their own solar panels.
.The result of this activity is 1 kg raw silk from 8 kg cocoons.

## Included activities start
From reception of cocoons.

## Included activities end
This activity ends with produced 1 kg reeled raw silk as the final product. Machinery is excluded.

## Technology
The following processes are used to process cocoons into raw silk: Oven drying, cooking and reeling and winding. These processes take in cocoons and heat them in oven for 6-7 hours, cooked in hot water. The cocoons are reeled in 10 basin Silk reeling machine. The reeled silk thus obtained is rereeled to form a standard hank of 70 g.

## Reference product
- reeled raw silk hank: 1 kg; By-product classification allocatable product; CPC 26110: Raw silk (not thrown); lognormal variance with pedigree 0.0026, pedigree (1,1,1,1,1)
  production volume 1.81594e8 kg
  properties: carbon allocation 0.365593 kg, carbon content 0.3769, carbon content, fossil 0, carbon content, non-fossil 0.3769, dry mass 0.97 kg, heating value, net 11 MJ, price 18.875 EUR2005, water content 0.0309278, water in wet mass 0.03 kg, wet mass 1 kg

## Inputs from technosphere
- biowaste: -3.96508, -0.0349217 kg (2 suppliers, which the file names only by identifier); sum of these -4 kg; lognormal variance with pedigree 0.0052, pedigree (2,4,1,5,1)
  properties: carbon content, non-fossil 0.1624, dry mass 0.4 kg, heating value, net 4.29 MJ, water content 1.5, wet mass 1 kg
- building, hall: 0.00410256 m2; lognormal variance with pedigree 0.3006, pedigree (2,1,3,5,1)
- cocoons: 8 kg; lognormal variance with pedigree 0.0106, pedigree (4,4,3,5,1)
  properties: carbon content, non-fossil 0.475, dry mass 0.5 kg, water content 1, wet mass 1 kg
- electricity, low voltage: 0.00262437, 0.00164794, 0.000534792, 0.000743919, 0.0024001, 0.0806904, 0.139954, 0.0383806, 0.000389899, 0.00210854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 kWh (46 suppliers, which the file names only by identifier); sum of these 3.392 kWh; lognormal variance with pedigree 0.0026, pedigree (1,4,3,5,1)
- fibre, silk, short: -3 kg; lognormal variance with pedigree 0.0106, pedigree (4,4,1,5,1)
  properties: carbon content, non-fossil 0.3769, dry mass 0.97 kg, heating value, net 11 MJ, price 11.7644 EUR2005, water content 0.0309278, wet mass 1 kg
- heat, central or small-scale, other than natural gas: 312.8 MJ; lognormal variance with pedigree 0.0026, pedigree (1,4,3,5,1)
  properties: heating value, net 1 MJ
- tap water: 0.581759, 89.9662, 67.1799, 1.56722, 0.188651, 0.311776, 0.204522 kg (7 suppliers, which the file names only by identifier); sum of these 160 kg; lognormal variance with pedigree 0.008, pedigree (1,4,3,5,1)
  properties: carbon content, fossil 0.00178991, dry mass 0.000337476 kg, water content 2962.17, wet mass 1 kg
- wastewater from textile production: -0.128 m3; lognormal variance with pedigree 0.0026, pedigree (1,4,1,5,1)
  properties: BOD5, mass per volume 0.495 kg/m3, COD, mass per volume 0.501 kg/m3, carbon content, non-fossil 0.216883, dry mass 0.238473 kg, mass concentration, aluminium 0.0007758 kg/m3, mass concentration, copper 0.0001091 kg/m3, mass concentration, iron 0.0005904 kg/m3, mass concentration, magnesium 0.003219 kg/m3, mass concentration, potassium 0.01647 kg/m3, mass concentration, zinc 0.0001075 kg/m3, water content 4192.34, wet mass 1000 kg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

## Emissions to nature
- Water [air, unspecified]: 0.032 m3; lognormal variance with pedigree 0.0026, pedigree (1,4,3,5,1)

## Sampling procedure
Extrapolated from IN data, uncertainty adjusted accordingly.
