# energy and auxilliary inputs, metal working factory, with heating from light fuel oil

Dataset: EcoSpold 2, unit process
Geography: RoW
Time period: 2006-01-01 to 2022-12-31
Technology level: current
Classification: ISIC rev.4 ecoinvent: 259:Manufacture of other fabricated metal products; metalworking service activit
Classification: EcoSpold01Categories: metals/general manufacturing
Tags: ConvertedDataset
Scenario: Business-as-Usual
System model: Allocation, cut-off by classification
Share of production covered: 0 %
Generated by: Roland Steiner
Published in: Steiner, R. 2007
Database: ecoinvent
isCopyrightProtected: true
accessRestrictedTo: 1

## General comment
1 kg of this process is needed to produce 1 kg of final product. The data is an estimation based on the average consumption of factories separated into process specific (included in metal working machine operation) and ancillary processes (included here).
[This dataset was already contained in the ecoinvent database version 2. It was not individually updated during the transfer to ecoinvent version 3. Life Cycle Impact Assessment results may still have changed, as they are affected by changes in the supply chain, i.e. in other datasets. This dataset was generated following the ecoinvent quality guidelines for version 2. It may have been subject to central changes described in the ecoinvent version 3 change report (http://www.ecoinvent.org/database/ecoinvent-version-3/reports-of-changes/), and the results of the central updates were reviewed extensively. The changes added e.g. consistent water flows and other information throughout the database. The documentation of this dataset can be found in the ecoinvent reports of version 2, which are still available via the ecoinvent website. The change report linked above covers all central changes that were made during the conversion process.]

## Included activities end
This dataset includes ancillary processes to operate a metal working factory. This encompasses electricity for lighting and general water consumption. Heat energy is from light fuel oil.

## Geography
Average data from several local to global sized companies. The main focus is on Germany and Europe.

## Technology
The companies are expected to cover the whole range of metal working.

## Parameters
- fraction, process water, to air: 0.15 dimensionless; lognormal variance with pedigree 0.092025, pedigree (4,4,3,2,4)
- fraction, tap water, to air: 0.15 dimensionless; lognormal variance with pedigree 0.092025, pedigree (4,4,3,2,4)

## Reference product
- energy and auxilliary inputs, metal working factory: 1 kg; By-product classification allocatable product; CPC 54269: General construction services of other industrial plants
  production volume 1.4796e11 kg
  properties: carbon allocation 0 kg, carbon content 0, price 0.0238411 EUR2005

## Inputs from technosphere
- electricity, low voltage: 0.0118503, 0.00174173, 0.000591476, 0.0034517, 0.0331572, 0.000107562 kWh (6 suppliers, which the file names only by identifier); sum of these 0.0509 kWh; lognormal variance with pedigree 0.0208, pedigree (1,3,5,5,3)
- hazardous waste, for incineration: -0.0245 kg; lognormal variance with pedigree 0.0208, pedigree (1,3,2,5,3)
  properties: carbon content, fossil 0.554667, dry mass 0.75 kg, heating value, net 17 MJ, water content 0.333333, wet mass 1 kg
- heat, district or industrial, other than natural gas: 1.25342, 0.000580686 MJ (2 suppliers, which the file names only by identifier); sum of these 1.254 MJ; lognormal variance with pedigree 0.0208, pedigree (1,3,5,5,3)
  properties: heating value, net 1 MJ
- municipal solid waste: -5.09174e-5, -0.142914, -0.000202073, -7.2764e-5 kg (4 suppliers, which the file names only by identifier); sum of these -0.14324 kg; lognormal variance with pedigree 0.0208, pedigree (1,3,2,5,3)
  properties: carbon content, fossil 0.171549, carbon content, non-fossil 0.261655, dry mass 0.771 kg, heating value, net 11.74 MJ, water content 0.297017, wet mass 1 kg
- tap water: 0.976065, 0.0722274, 11.1696, 0.194575, 0.0234216, 0.0387081, 0.0253921 kg (7 suppliers, which the file names only by identifier); sum of these 12.5 kg; lognormal variance with pedigree 0.0208, pedigree (1,3,5,5,3)
  properties: carbon content, fossil 0.00178991, dry mass 0.000337476 kg, water content 2962.17, wet mass 1 kg
- wastewater, average: -0.0120571, -4.29278e-5 m3 (2 suppliers, which the file names only by identifier); sum of these -0.0121 m3; lognormal variance with pedigree 0.0208, pedigree (1,3,2,5,3)
  properties: carbon content, non-fossil 0.194039, dry mass 0.346837 kg, water content 2882.2, wet mass 1000 kg

## Emissions to nature
- Water [air, unspecified]: 0.001875 m3; lognormal variance with pedigree 0.0427, pedigree (2,2,5,5,1)

## Extrapolations
none This dataset has been copied from an original dataset covering the geography RER. The uncertainty has been adjusted accordingly.

## Review by Sébastien Humbert 2007-09-05
passed
none
