# cadmium sulfide production, semiconductor-grade

Dataset: EcoSpold 2, unit process
Geography: RoW
Time period: 1981-01-01 to 2022-12-31
Technology level: current
Classification: ISIC rev.4 ecoinvent: 2011:Manufacture of basic chemicals
Synonyms: Orange cadmium; Thioxocadmium; Cadmium sulfide (CdS); Capsebon; Cadmium sulphide
Scenario: Business-as-Usual
System model: Allocation, cut-off by classification
Generated by: Matthias Tuchschmid (obsolete)
Published in: Classen M. 2009
Database: ecoinvent
isCopyrightProtected: true
accessRestrictedTo: 1

## General comment
This dataset represents the production of 1 kg of high-grade cadmium sulfide (99.99% purity) from cadmium and sulfuric acid. Cadmium sulfide (CdS) is used in thin film solar cells as a junction partner in CIS (Copper-Indium-Diselenid) and Cd/Te solar cells. The CdS layer itself is not intended to absorb light but instead allows light to pass through to either the CIS or CdTe substrate. Therefore, the CdS layer must be thin (30 to 100 nanometre) in order to allow sufficient light to pass through. A purity of at least 99.99% (4N) is required.
CdS is also used as pigment, that is valued for its good thermal stability in many polymers, for example in engineering plastics. By adding selenium in its formula it is possible to obtain colours ranging from a greenish yellow to red violet. Pigments do not necessarily need a purity as high as for solar cells.
References:
Classen M., Althaus H.-J., Blaser S., Tuchschmid M., Jungbluth N., Doka G., Faist Emmenegger M. and Scharnhorst W. (2009) Life Cycle Inventories of Metals. Final report ecoinvent data v2.1, No 10. EMPA Dübendorf, Swiss Centre for Life Cycle Inventories, Dübendorf, CH.

## Included activities start
The activity starts when the raw materials enter the process.

## Included activities end
This activity ends with the production of cadmium sulfide. The energy consumption and emissions are estimated.

## Geography
Production in US. The data are assumed to be representative of the global production.

## Technology
Production of cadmium sulfide by the hydrometallurgical process. This aqueous technique of producing CdS involves a number of handling steps and is a complex procedure. According to a patent, the normal procedure is to “dissolve a cadmium salt in water, preferably the chloride or sulphate, and then bubble hydrogen sulfide through the solution to precipitate essentially all of the cadmium in the form of cadmium sulfide.” The reported yield is quite high; anionic and cationic impurities co-precipitates with the cadmium sulfide. The following purification involves extensive washing and leaching, until a high purity of the output product can be obtained.
Reference(s):
Classen M., Althaus H.-J., Blaser S., Tuchschmid M., Jungbluth N., Doka G., Faist Emmenegger M. and Scharnhorst W. (2009) Life Cycle Inventories of Metals. Final report ecoinvent data v2.1, No 10. EMPA Dübendorf, Swiss Centre for Life Cycle Inventories, Dübendorf, CH.

## Time period
Time of patents.

## Reference product
- cadmium sulfide, semiconductor-grade: 1 kg; By-product classification allocatable product; CPC 34250: Salts of oxometallic or peroxometallic acids; colloidal precious metals and compounds thereof; inorganic and o[…]
  production volume 1037.33 kg
  properties: carbon allocation 0 kg, carbon content 0, carbon content, fossil 0, carbon content, non-fossil 0, dry mass 1 kg, price 0.970836 EUR2005, water content 0, water in wet mass 0 kg, wet mass 1 kg

## Inputs from technosphere
- cadmium chloride, semiconductor-grade: 1.3353 kg; lognormal variance with pedigree 0.2942, pedigree (5,4,5,5,5)
  properties: dry mass 1 kg, wet mass 1 kg
- chemical factory, organics: 4e-10 unit; lognormal variance with pedigree 0.3098, pedigree (2,3,5,4,3)
- electricity, medium voltage: 0.000187161, 0.000612004, 0.000101606, 0.000275183, 0.000138105, 0.00252483, 4.1814e-5, 8.19496e-6 kWh (8 suppliers, which the file names only by identifier); sum of these 0.0038889 kWh; lognormal variance with pedigree 0.178, pedigree (4,5,5,5,4)
- hydrogen sulfide: 0.0432233, 0.205187 kg (2 suppliers, which the file names only by identifier); sum of these 0.24841 kg; lognormal variance with pedigree 0.2942, pedigree (5,4,5,5,5)
  properties: dry mass 1 kg, heating value, net 7.11 MJ, wet mass 1 kg

## Emissions to nature
- Cadmium II [water, unspecified]: 2.6e-6 kg; lognormal variance with pedigree 0.6102, pedigree (5,5,5,5,5)
- Chloride [water, unspecified]: 0.51575 kg; lognormal variance with pedigree 0.6102, pedigree (5,5,5,5,5)

## Sampling procedure
Literature and estimations.

## Extrapolations
Energy consumption is extrapolated from CdCl due to lack of data and similarity of processes. This dataset has been copied from an original dataset covering the geography US. The uncertainty has been adjusted accordingly.

## Review by Emilia Moreno Ruiz 2017-08-09
This dataset was additionally reviewed in a separate review process by Eric Johnson of Atlantic Consulting as well as Emilia Moreno Ruiz and Gregor Wernet of ecoinvent.
