# heat production, softwood chips from forest, at furnace 300kW, state-of-the-art 2014

Dataset: EcoSpold 2, unit process
Geography: RoW
Time period: 2014-01-01 to 2022-12-31
Technology level: modern
Classification: ISIC rev.4 ecoinvent: 3530:Steam and air conditioning supply
Classification: EcoSpold01Categories: wood energy/heating systems
Synonyms: automatic wood heating system
Scenario: Business-as-Usual
System model: Allocation, cut-off by classification
Share of production covered: 0.1 %
Generated by: Christian Bauer
Published in: Bauer, C. 2007
Database: ecoinvent
isCopyrightProtected: true
accessRestrictedTo: 1

## General comment
This activity represents the combustion of natural wood chips from forest in Switzerland in new (=installed in 2014) boilers and is used as GLO activity as first approximation with adjusted uncertainties. Equipped with an industrila electrostatic precipitator in order to comply with PM emission regulation. Characteristics of the of wood chips to be burned: Dry wood density 650kg/m3; Energy content (LHV, oven-dry) 19.1 MJ/kg. The humidity of the wood chips when burned is assumed to be in an accurate range for appropriate combustion conditions, which is achieved after some weeks of natural drying in the storage. Air emission factors as well as the boiler efficiency represent average annual operation including start and stop (warm-up and shut-down). Therefore, emission data will be higher and efficiency will be lower than rated values provided by manufacturers. The inventory shall be considered as being representative also for boilers with nominal capacities in the approximate range of 70 kW to 500 kW.

## Included activities start
from delivery of wood chips

## Included activities end
This activity describes the combustion of natural wood chips from forest in new (=installed in 2014) boilers. Included are the infrastructure, the wood requirements (wood chips from forest), the emissions to air, the electricity needed for operation, and the disposal of the ashes.

## Geography
LCI data for Switzerland were used for the GLO activityy as first approximation with uncertainty factors adjusted accordingly.

## Technology
Modern boiler technology available on the Swiss market, installed in 2014.

## Time period
Key emission factors PM, CO, NMVOC, CH4, NOx as well as the average annual efficiency have been updated using the latest available information. Other emission data (which hardly depend on the combustion technology) are from the second half of the 1990´s.

## Parameters
- scaling factor: 1.25 dimensionless; name scaling_factor; = 1/0.8; lognormal variance with pedigree 0.012, pedigree (2,3,1,5,3)
  The scaling factor corresponds to the inverse of the average annual efficiency of the heating system, including start/stop (warm up and cool down). Therefore, this efficiency will be lower than figures provided by manufacturers. The estimated value was provided by T.Nussbaumer, Verenum, and represents newly (=in 2014) installed boiler in this size category in Switzerland.

## Reference product
- heat, district or industrial, other than natural gas: 1 MJ; By-product classification allocatable product; CPC 17300: Steam and hot water
  production volume 5.9e10 MJ
  properties: Corresponding fuel use 1.21951 MJ, carbon allocation 0 kg, carbon content 0, heating value, net 1 MJ, price 0.0106 EUR2005

## Inputs from technosphere
- dust collector, electrostatic precipitator, for industrial use: 2.31481e-8 unit; lognormal variance with pedigree 0.011, pedigree (2,2,5,5,2)
- electricity, low voltage: 0.000204903, 0.00100385, 0.000147543, 5.01043e-5, 0.000292396, 0.000695825, 0.00280877, 9.11167e-6 kWh (8 suppliers, which the file names only by identifier); sum of these 0.0052125 kWh; lognormal variance with pedigree 0.011, pedigree (2,2,5,5,2)
- furnace, wood chips, with silo, 300kW: 2.31481e-8 unit; lognormal variance with pedigree 0.011, pedigree (2,2,5,5,2)
- wood ash mixture, pure: -0.000402137, -0.000192863 kg (2 suppliers, which the file names only by identifier); sum of these -0.000595 kg; lognormal variance with pedigree 0.011, pedigree (2,2,4,5,2)
  properties: carbon content, non-fossil 0.012, dry mass 1 kg, wet mass 1 kg
- wood chips, wet, measured as dry mass: 0.0639935, 0.00130653, 0.000144994 kg (3 suppliers, which the file names only by identifier); sum of these 0.065445 kg; lognormal variance with pedigree 0.011, pedigree (2,2,5,5,2)
  properties: carbon content, non-fossil 0.494, dry mass 1 kg, heating value, net 10.84 MJ, water content 1.4, wet mass 2.4 kg

## Emissions to nature
- Acetaldehyde [air, urban air close to ground]: 7.625e-8 kg; lognormal variance with pedigree 0.011, pedigree (2,2,5,5,2)
- Ammonia [air, urban air close to ground]: 2.1625e-6 kg; lognormal variance with pedigree 0.011, pedigree (2,2,5,5,2)
- Arsenic ion [air, urban air close to ground]: 1.25e-9 kg; lognormal variance with pedigree 0.011, pedigree (2,2,5,5,2)
- Benzene [air, urban air close to ground]: 1.1375e-6 kg; lognormal variance with pedigree 0.011, pedigree (2,2,5,5,2)
- Benzene, ethyl- [air, urban air close to ground]: 3.75e-8 kg; lognormal variance with pedigree 0.011, pedigree (2,2,5,5,2)
- Benzene, hexachloro- [air, urban air close to ground]: 9e-15 kg; lognormal variance with pedigree 0.011, pedigree (2,2,5,5,2)
- Benzo(a)pyrene [air, urban air close to ground]: 6.25e-10 kg; lognormal variance with pedigree 0.011, pedigree (2,2,5,5,2)
- Bromine [air, urban air close to ground]: 7.5e-8 kg; lognormal variance with pedigree 0.011, pedigree (2,2,5,5,2)
- Cadmium II [air, urban air close to ground]: 8.75e-10 kg; lognormal variance with pedigree 0.011, pedigree (2,2,5,5,2)
- Calcium [air, urban air close to ground]: 7.3125e-6 kg; lognormal variance with pedigree 0.011, pedigree (2,2,5,5,2)
- Carbon dioxide, non-fossil [air, urban air close to ground]: 0.1275 kg; lognormal variance with pedigree 0.011, pedigree (2,2,5,5,2)
- Carbon monoxide, non-fossil [air, urban air close to ground]: 0.00046875 kg; lognormal variance with pedigree 0.0033, pedigree (2,2,4,5,2)
- Chlorine [air, urban air close to ground]: 2.25e-7 kg; lognormal variance with pedigree 0.011, pedigree (2,2,5,5,2)
- Chromium III [air, urban air close to ground]: 4.95e-9 kg; lognormal variance with pedigree 0.011, pedigree (2,2,5,5,2)
- Chromium VI [air, urban air close to ground]: 5e-11 kg; lognormal variance with pedigree 0.011, pedigree (2,2,5,5,2)
- Copper ion [air, urban air close to ground]: 2.75e-8 kg; lognormal variance with pedigree 0.011, pedigree (2,2,5,5,2)
- Dinitrogen monoxide [air, urban air close to ground]: 3.125e-6 kg; lognormal variance with pedigree 0.011, pedigree (2,2,5,5,2)
- Dioxins, measured as 2,3,7,8-tetrachlorodibenzo-p-dioxin [air, urban air close to ground]: 3.875e-14 kg; lognormal variance with pedigree 0.011, pedigree (2,2,5,5,2)
- Fluorine [air, urban air close to ground]: 6.25e-8 kg; lognormal variance with pedigree 0.011, pedigree (2,2,5,5,2)
- Formaldehyde [air, urban air close to ground]: 1.625e-7 kg; lognormal variance with pedigree 0.011, pedigree (2,2,5,5,2)
- Hydrocarbons, aliphatic, alkanes, unspecified [air, urban air close to ground]: 1.1375e-6 kg; lognormal variance with pedigree 0.011, pedigree (2,2,5,5,2)
- Hydrocarbons, aliphatic, unsaturated [air, urban air close to ground]: 3.875e-6 kg; lognormal variance with pedigree 0.011, pedigree (2,2,5,5,2)
- Lead II [air, urban air close to ground]: 3.125e-8 kg; lognormal variance with pedigree 0.011, pedigree (2,2,5,5,2)
- Magnesium [air, urban air close to ground]: 4.5e-7 kg; lognormal variance with pedigree 0.011, pedigree (2,2,5,5,2)
- Manganese II [air, urban air close to ground]: 2.125e-7 kg; lognormal variance with pedigree 0.011, pedigree (2,2,5,5,2)
- Mercury II [air, urban air close to ground]: 3.75e-10 kg; lognormal variance with pedigree 0.011, pedigree (2,2,5,5,2)
- Methane, non-fossil [air, urban air close to ground]: 4.875e-6 kg; lognormal variance with pedigree 0.0033, pedigree (2,2,4,5,2)
- NMVOC, non-methane volatile organic compounds [air, urban air close to ground]: 1.1375e-5 kg; lognormal variance with pedigree 0.0033, pedigree (2,2,4,5,2)
- Nickel II [air, urban air close to ground]: 7.5e-9 kg; lognormal variance with pedigree 0.011, pedigree (2,2,5,5,2)
- Nitrogen oxides [air, urban air close to ground]: 0.000125 kg; lognormal variance with pedigree 0.0033, pedigree (2,2,4,5,2)
- PAH, polycyclic aromatic hydrocarbons [air, urban air close to ground]: 1.3875e-8 kg; lognormal variance with pedigree 0.011, pedigree (2,2,5,5,2)
- Particulate Matter, < 2.5 um [air, urban air close to ground]: 2.8125e-5 kg; lognormal variance with pedigree 0.0033, pedigree (2,2,4,5,2)
- Particulate Matter, > 2.5 um and < 10um [air, urban air close to ground]: 1.625e-6 kg; lognormal variance with pedigree 0.0033, pedigree (2,2,4,5,2)
- Phenol, pentachloro- [air, urban air close to ground]: 1.0125e-11 kg; lognormal variance with pedigree 0.011, pedigree (2,2,5,5,2)
- Phosphorus [air, urban air close to ground]: 3.75e-7 kg; lognormal variance with pedigree 0.011, pedigree (2,2,5,5,2)
- Potassium I [air, urban air close to ground]: 2.925e-5 kg; lognormal variance with pedigree 0.011, pedigree (2,2,5,5,2)
- Sodium [air, urban air close to ground]: 1.625e-6 kg; lognormal variance with pedigree 0.011, pedigree (2,2,5,5,2)
- Sulfur dioxide [air, urban air close to ground]: 3.125e-6 kg; lognormal variance with pedigree 0.011, pedigree (2,2,5,5,2)
- Toluene [air, urban air close to ground]: 3.75e-7 kg; lognormal variance with pedigree 0.011, pedigree (2,2,5,5,2)
- Water [air, urban air close to ground]: 0.0001 m3; lognormal variance with pedigree 0.0083, pedigree (2,2,4,5,2)
- Zinc II [air, urban air close to ground]: 3.75e-7 kg; lognormal variance with pedigree 0.011, pedigree (2,2,5,5,2)
- m-Xylene [air, urban air close to ground]: 1.5e-7 kg; lognormal variance with pedigree 0.011, pedigree (2,2,5,5,2)

## Sampling procedure
literature

## Extrapolations
This dataset has been copied from an original dataset covering the geography CH. The uncertainty has been adjusted accordingly.
