# battery cell production, Li-ion, NMC111

Dataset: EcoSpold 2, unit process
Geography: RoW
Time period: 2017-01-01 to 2022-12-31
Technology level: current
Classification: ISIC rev.4 ecoinvent: 2720:Manufacture of batteries and accumulators
Synonyms: battery cell, nickel-manganese-cobalt 111, Li-ion
Scenario: Business-as-Usual
System model: Allocation, cut-off by classification
Generated by: Eleonora Crenna
Published in: Dai, Q. 2019
Database: ecoinvent
isCopyrightProtected: true
accessRestrictedTo: 1

## General comment
This dataset represents the production of 1 kg of Li-ion battery cell with nickel-manganese-cobalt 111 (NMC111) cathode and graphite-based anode. The specific energy capacity of a cell is 0.197 kWh/kg cell, as reported in Dai et al. (2019). The inventory is modelled according to the publication of Dai et al. (2019) and expert judgement. Infrastructure is included as well. This dataset is a copy of the corresponding regional dataset. Production volume was adjusted.
Reference:
Dai, Q., Kelly, J. C., Gaines, L., & Wang, M. (2019). Life cycle analysis of lithium-ion batteries for automotive applications. Batteries, 5(2), 48.

## Included activities start
The activity starts with the battery cell components and the materials for additional components (esternal case, tabs, etc.) entering the factory gate.

## Included activities end
The activity ends with the production of Li-ion battery cells.

## Geography
This dataset is considered representative of the global situation. It is based on data from the geography China, which is the leader country of Li-ion battery production.

## Technology
This dataset includes a method of producing Li-ion cell. Lithium ions move from the cathode (NMC111) into the electrolyte through the micropores of the separator into the graphite anode during the charging phase. During the discharge of the battery, the Li+-ions move back into the cathode.

## Time period
The time period is from 2017 (year of the collection of data) and 2020 (year of the dataset)

## Reference product
- battery cell, Li-ion, NMC111: 1 kg; By-product classification allocatable product; CPC 46410: Primary cells and primary batteries
  production volume 1.63979e8 kg
  properties: carbon allocation 0.251119 kg, carbon content 0.251119, carbon content, fossil 0.249355, carbon content, non-fossil 0.00176328, copper content 0.0333995, dry mass 1 kg, price 13.36 EUR2005, water content 0, water in wet mass 0 kg, wet mass 1 kg

## Inputs from technosphere
- aluminium collector foil, for Li-ion battery: 0.03 kg; lognormal variance with pedigree 0.0066, pedigree (3,4,2,5,1)
  properties: aluminium content 1, dry mass 1 kg, wet mass 1 kg
- aluminium, wrought alloy: 0.0283 kg; lognormal variance with pedigree 0.0066, pedigree (3,4,2,5,1)
  properties: dry mass 1 kg, wet mass 1 kg
- anode, graphite, for Li-ion battery: 0.2 kg; lognormal variance with pedigree 0.0052, pedigree (2,4,2,5,1)
  properties: carbon content, fossil 0.968898, carbon content, non-fossil 0.0088164, dry mass 1 kg, wet mass 1 kg
- battery separator: 0.02 kg; lognormal variance with pedigree 0.0052, pedigree (2,4,2,5,1)
  properties: carbon content, fossil 0.603377, dry mass 1 kg, wet mass 1 kg
- cathode, NMC111, for Li-ion battery: 0.41 kg; lognormal variance with pedigree 0.0066, pedigree (3,4,2,5,1)
  properties: carbon content, fossil 0.02125, dry mass 1 kg, wet mass 1 kg
- chemical factory, organics: 4e-10 unit; lognormal variance with pedigree 0.478, pedigree (4,5,5,5,5)
- copper collector foil, for Li-ion battery: 0.12 kg; lognormal variance with pedigree 0.0052, pedigree (2,4,2,5,1)
  properties: copper content 1, dry mass 1 kg, wet mass 1 kg
- copper, anode: 0.0335 kg; lognormal variance with pedigree 0.0066, pedigree (3,4,2,5,1)
  properties: copper content 0.997, dry mass 1 kg, wet mass 1 kg
- electricity, medium voltage: 0.00103988, 0.000452592, 0.0604666, 0.0937003, 0.000984415, 0.00150679, 0.0692475, 0.000574665, 0.226435, 0.0159714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 kWh (46 suppliers, which the file names only by identifier); sum of these 1.1875 kWh; lognormal variance with pedigree 0.0452, pedigree (2,4,5,5,1)
- electrolyte, for Li-ion battery: 0.146 kg; lognormal variance with pedigree 0.0052, pedigree (2,4,2,5,1)
  properties: carbon content, fossil 0.183946, dry mass 1 kg, wet mass 1 kg
- extrusion, plastic film: 0.0041 kg; lognormal variance with pedigree 0.0066, pedigree (3,4,2,5,1)
- heat, district or industrial, natural gas: 12.51 MJ; lognormal variance with pedigree 0.0052, pedigree (2,4,2,5,1)
  properties: heating value, net 1 MJ
- polyethylene terephthalate, granulate, amorphous: 0.0028 kg; lognormal variance with pedigree 0.0066, pedigree (3,4,2,5,1)
  properties: carbon content, fossil 0.625, dry mass 1 kg, heating value, net 22.95 MJ, wet mass 1 kg
- polypropylene, granulate: 0.0013 kg; lognormal variance with pedigree 0.0066, pedigree (3,4,2,5,1)
  properties: carbon content, fossil 0.857143, dry mass 1 kg, heating value, net 32.78 MJ, wet mass 1 kg
- sheet rolling, aluminium: 0.0283 kg; lognormal variance with pedigree 0.0066, pedigree (3,4,2,5,1)
- sheet rolling, copper: 0.0335 kg; lognormal variance with pedigree 0.0066, pedigree (3,4,2,5,1)

## Sampling procedure
From Literature an expert judgement

## Extrapolations
The dataset is extrapolated from CN data; the uncertainty has been adjusted accordingly.
