# uranium production, centrifuge, enriched 4.2%

Dataset: EcoSpold 2, unit process
Geography: RoW
Time period: 1993-01-01 to 2022-12-31
Technology level: current
Classification: EcoSpold01Categories: nuclear power/production
Classification: ISIC rev.4 ecoinvent: 2011:Manufacture of basic chemicals
Tags: ConvertedDataset
Scenario: Business-as-Usual
System model: Allocation, cut-off by classification
Generated by: [System]
Published in: Dones, R. 2007
Database: ecoinvent
isCopyrightProtected: true
accessRestrictedTo: 1

## General comment
This module uses a mix of data, some specific for the URENCO facilities taken from environmental reports, some from literature. Due to lack of information on Russian plants, all requirements and emissions are arbitrarily assumed the double of the URENCO module. Only (but still approximate) information available for TENEX facility is the electricity consumption by machines of two recent generations. A mix of generations has been assumed here, assuming conservatively a high value for auxiliary electricity (i.e., not directly used for spinning the centrifuges). The Russian electricity mix is used, which has been has been approximated using existing ecoinvent v2.0 electricity datasets for Europe. The factor for the infrastructure requirement is calculated with annual throughput of 1500 t SWU for 30 years operation (the Russian facilities are larger but this should not affect much the figures normalized by the total production).
[This dataset was already contained in the ecoinvent database version 2. It was not individually updated during the transfer to ecoinvent version 3. Life Cycle Impact Assessment results may still have changed, as they are affected by changes in the supply chain, i.e. in other datasets. This dataset was generated following the ecoinvent quality guidelines for version 2. It may have been subject to central changes described in the ecoinvent version 3 change report (http://www.ecoinvent.org/database/ecoinvent-version-3/reports-of-changes/), and the results of the central updates were reviewed extensively. The changes added e.g. consistent water flows and other information throughout the database. The documentation of this dataset can be found in the ecoinvent reports of version 2, which are still available via the ecoinvent website. The change report linked above covers all central changes that were made during the conversion process.]
[This dataset is meant to replace the following datasets:]

## Included activities end
The module is an extrapolation of the corresponding one for URENCO. The module includes: input of UF6; electricity, diesel, and natural gas used for operation; also taken into account is the material for replacement of centrifuge; water use, lubricant oil, and wastewater treatment; concrete assumed to be used for conditioning of contaminated scrap from decommissioning; transport requirements of operation materials, industrial wastes, and contaminated waste from decommissioning (25% of the reinforced concrete and the great part of metals according to the reference). Radioactive and non-radioactive emissions to air and to water from the operation are also included. The infrastructure requirements are accounted for, though construction and operation data partially refer to different plants rather than to one single unit.

## Geography
US and Western European data. Russian data for electricity uses.

## Technology
The technology used for uranium enrichment with centrifuge process in Russia is a mix of three generations of machines.

## Parameters
- fraction, cooling water, cooling pond system, to air: 0.032 dimensionless; name fraction_CW_CP_to_air; lognormal variance with pedigree 0.0413, pedigree (2,3,1,3,1)
  Calculated based on literature value (Scown, C.D., 2011, Water Footprint of U.S. Transportation Fuels and supplying information of the article) (Vionnet, S., Quantis Water Database - Technical Report, 2012).
- fraction, cooling water, once-through system, to air: 0.004 dimensionless; name fraction_CW_OT_to_air; lognormal variance with pedigree 0.0413, pedigree (2,3,1,3,1)
  (same comment as for fraction, cooling water, cooling pond system, to air)
- fraction, cooling water, recirculating system, to air: 0.771 dimensionless; name fraction_CW_R_to_air; lognormal variance with pedigree 0.0413, pedigree (2,3,1,3,1)
  (same comment as for fraction, cooling water, cooling pond system, to air)
- fraction, cooling water, to air: 0.3875 dimensionless; name fraction_CW_to_air; = (0.5*fraction_CW_OT_to_air)+(0.5*fraction_CW_R_to_air); lognormal variance with pedigree 0.092025, pedigree (4,4,3,2,4)
  Calculated value based on literature value (see comments of the other parametres present in this dataset) and expert opinion. In the case when no industry/literature data are available about the type of cooling or directly fraction, cooling water, to air specific for the process a default assumption is applied. It is assumed that the once-through cooling system is used in 50% of all cases and recirculating system is used in another 50% of all cases.
- fraction, water, decarbonised, to air: 0.3875 dimensionless; name fraction_WDC_to_air; lognormal variance with pedigree 0.092025, pedigree (4,4,3,2,4)
  Calculated value. See comments in the other parametres present in this dataset. Decarbonised water is considered to be always used as cooling water, thus cooling water fractions to air are applied to all carbonised water input flows to calculate the amount of water consumed in the processes.

## Reference product
- uranium, enriched 4.2%, per separative work unit: 1 unit; By-product classification allocatable product; CPC 33620: Uranium enriched in U235 and its compounds; plutonium and its compounds; alloys, dispersions, ceramic products[…]
  production volume 2.98e6 unit
  properties: carbon allocation 0 kg, carbon content 0, carbon content, fossil 0, carbon content, non-fossil 0, dry mass 1 kg, price 294.766 EUR2005, water content 0, water in wet mass 0 kg, wet mass 1 kg

## Inputs from technosphere
- acetylene: 3.95105e-5 kg; lognormal variance with pedigree 0.122, pedigree (1,1,5,5,1)
  properties: carbon content, fossil 0.923077, dry mass 1 kg, heating value, net 51.2 MJ, wet mass 1 kg
- aluminium, wrought alloy: 0.079021 kg; lognormal variance with pedigree 0.122, pedigree (1,1,5,5,1)
  properties: dry mass 1 kg, wet mass 1 kg
- argon, liquid: 0.00284476 kg; lognormal variance with pedigree 0.122, pedigree (1,1,5,5,1)
  properties: dry mass 1 kg, wet mass 1 kg
- brass: 1.42238e-5, 0.00283053 kg (2 suppliers, which the file names only by identifier); sum of these 0.00284476 kg; lognormal variance with pedigree 0.122, pedigree (1,1,5,5,1)
  properties: dry mass 1 kg, wet mass 1 kg
- chemical, inorganic: 0.049151 kg; lognormal variance with pedigree 0.122, pedigree (1,1,5,5,1)
  properties: carbon content, fossil 0.003, dry mass 1 kg, wet mass 1 kg
- chemical, organic: 0.00129594 kg; lognormal variance with pedigree 0.122, pedigree (1,1,5,5,1)
  properties: carbon content, fossil 0.628, dry mass 1 kg, heating value, net 19.03 MJ, wet mass 1 kg
- concrete, normal strength: 9.63949e-5, 4.57397e-5, 8.72394e-6, 8.1315e-5, 6.53321e-6, 1.00442e-5, 0.000193695, 1.58758e-5 m3 (8 suppliers, which the file names only by identifier); sum of these 0.000458322 m3; lognormal variance with pedigree 0.122, pedigree (1,1,5,5,1)
  properties: dry mass 2190 kg, water content 0.086758, wet mass 2380 kg
- diesel, burned in diesel-electric generating set, 10MW: 0.537063 MJ; lognormal variance with pedigree 0.002, pedigree (1,1,5,5,1)
  properties: heating value, net 1 MJ
- electricity, high voltage: 12.479, 0.0672067, 0.0802922, 0.0139562, 0.0289469, 0.135844, 0.65489, 0.0204761, 0.0608452, 0.300844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 kWh (44 suppliers, which the file names only by identifier); sum of these 65.3284 kWh; lognormal variance with pedigree 0.122, pedigree (1,1,5,5,1)
- electricity, medium voltage: 0.0107924, 0.0434793, 0.00347121, 0.0347976, 0.100231, 0.00442176, 0.00916428, 0.00538936, 0.0980114, 0.0584513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 kWh (43 suppliers, which the file names only by identifier); sum of these 16.7832 kWh; lognormal variance with pedigree 0.012, pedigree (1,1,5,5,1)
- heat, district or industrial, natural gas: 21.2641, 0.00657127, 0.349424 MJ (3 suppliers, which the file names only by identifier); sum of these 21.6201 MJ; lognormal variance with pedigree 0.122, pedigree (1,1,5,5,1)
  properties: heating value, net 1 MJ
- hydrochloric acid, without water, in 30% solution state: 0.000316084 kg; lognormal variance with pedigree 0.122, pedigree (1,1,5,5,1)
  properties: dry mass 1 kg, heating value, net 3.32 MJ, wet mass 1 kg
- hydrogen peroxide, without water, in 50% solution state: 0.0010979 kg; lognormal variance with pedigree 0.122, pedigree (1,1,5,5,1)
  properties: dry mass 1 kg, heating value, net 7.13 MJ, wet mass 1 kg
- hydrogen, liquid: 1.73846e-5 kg; lognormal variance with pedigree 0.122, pedigree (1,1,5,5,1)
  properties: dry mass 1 kg, heating value, net 120.21 MJ, wet mass 1 kg
- low level radioactive waste: -0.00063 m3; lognormal variance with pedigree 0.122, pedigree (1,1,1,5,1)
  properties: dry mass 2500 kg, wet mass 2500 kg
- lubricating oil: 0.0145399 kg; lognormal variance with pedigree 0.122, pedigree (1,1,5,5,1)
  properties: carbon content, fossil 0.75, dry mass 1 kg, heating value, net 40.2 MJ, wet mass 1 kg
- methanol: 0.000505734 kg; lognormal variance with pedigree 0.122, pedigree (1,1,5,5,1)
  properties: carbon content, fossil 0.375, dry mass 1 kg, heating value, net 20 MJ, wet mass 1 kg
- municipal solid waste: -0.00016798, -9.94392e-5, -1.41087e-5, -0.00293672, -0.000907422, -0.000124477, -0.000468787, -3.68929e-5, -0.00049328, -0.00128737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 kg (37 suppliers, which the file names only by identifier); sum of these -0.371399 kg; lognormal variance with pedigree 0.122, pedigree (1,1,1,5,1)
  properties: carbon content, fossil 0.171549, carbon content, non-fossil 0.261655, dry mass 0.771 kg, heating value, net 11.74 MJ, water content 0.297017, wet mass 1 kg
- nitric acid, without water, in 50% solution state: 0.000456703, 0.000132787, 0.000846132, 7.50017e-5, 0.000111028, 0.000277133, 0.000111441, 0.000360403 kg (8 suppliers, which the file names only by identifier); sum of these 0.00237063 kg; lognormal variance with pedigree 0.122, pedigree (1,1,5,5,1)
  properties: dry mass 1 kg, wet mass 1 kg
- nitrogen, liquid: 0.000616364 kg; lognormal variance with pedigree 0.122, pedigree (1,1,5,5,1)
  properties: dry mass 1 kg, wet mass 1 kg
- oxygen, liquid: 5.68951e-5 kg; lognormal variance with pedigree 0.122, pedigree (1,1,5,5,1)
  properties: dry mass 1 kg, wet mass 1 kg
- phosphoric acid, fertiliser grade, without water, in 70% solution state: 0.00018965 kg; lognormal variance with pedigree 0.122, pedigree (1,1,5,5,1)
  properties: dry mass 1 kg, wet mass 1 kg
- polyvinylchloride, bulk polymerised: 0.00135175 kg; lognormal variance with pedigree 0.122, pedigree (1,1,5,5,1)
  properties: carbon content, fossil 0.387097, dry mass 1 kg, heating value, net 21.5 MJ, wet mass 1 kg
- soap: 0.00141399 kg; lognormal variance with pedigree 0.122, pedigree (1,1,5,5,1)
  properties: carbon content, non-fossil 0.692237, dry mass 0.87 kg, heating value, net 17.93 MJ, water content 0.149425, wet mass 1 kg
- sodium hydroxide, without water, in 50% solution state: 0.00442517 kg; lognormal variance with pedigree 0.122, pedigree (1,1,5,5,1)
  properties: dry mass 1 kg, heating value, net 3.03 MJ, wet mass 1 kg
- spent anion exchange resin from potable water production: -0.0013642, -0.0903001 kg (2 suppliers, which the file names only by identifier); sum of these -0.0916643 kg; lognormal variance with pedigree 0.122, pedigree (1,1,1,5,1)
  properties: carbon content, fossil 0.654, dry mass 0.5 kg, heating value, net 6.08 MJ, water content 1, wet mass 1 kg
- steel, low-alloyed, hot rolled: 0.237063 kg; lognormal variance with pedigree 0.122, pedigree (1,1,5,5,1)
  properties: carbon content, fossil 0.005, dry mass 1 kg, wet mass 1 kg
- uranium enrichment centrifuge facility: 2.22e-8 unit; lognormal variance with pedigree 0.122, pedigree (1,1,5,5,1)
- uranium hexafluoride: 1.38977, 0.0402302 kg (2 suppliers, which the file names only by identifier); sum of these 1.43 kg; lognormal variance with pedigree 0.002, pedigree (1,1,5,5,1)
  properties: dry mass 1 kg, wet mass 1 kg
- waste mineral oil: -0.00375748, -3.55263e-5 kg (2 suppliers, which the file names only by identifier); sum of these -0.00379301 kg; lognormal variance with pedigree 0.122, pedigree (1,1,1,5,1)
  properties: carbon content, fossil 0.864444, dry mass 0.9 kg, heating value, net 34.7 MJ, water content 0.111111, wet mass 1 kg
- water, decarbonised: 0.156795, 2.29105, 0.199314, 1.2313, 0.0606152, 0.305289, 0.117329, 1.9448, 0.0149878, 0.000190921 kg (10 suppliers, which the file names only by identifier); sum of these 6.32168 kg; lognormal variance with pedigree 0.122, pedigree (1,1,5,5,1)
  properties: wet mass 1 kg

## Emissions to nature
- Ethane, 1,1,1,2-tetrafluoro-, HFC-134a [air, non-urban air or from high stacks]: 0.000410909 kg; lognormal variance with pedigree 0.122, pedigree (1,1,5,5,1)
- Ethanol [air, non-urban air or from high stacks]: 0.00205455 kg; lognormal variance with pedigree 0.122, pedigree (1,1,5,5,1)
- Hydrogen fluoride [air, non-urban air or from high stacks]: 5.84755e-8 kg; lognormal variance with pedigree 0.122, pedigree (1,1,5,5,1)
- Thorium-234 [air, non-urban air or from high stacks]: 0.000458322 kBq; lognormal variance with pedigree 0.122, pedigree (1,1,5,5,1)
- Uranium alpha [air, non-urban air or from high stacks]: 9.16643e-5 kBq; lognormal variance with pedigree 0.122, pedigree (1,1,5,5,1)
- Water [air, unspecified]: 0.00244965 m3; lognormal variance with pedigree 0.0427, pedigree (2,2,5,5,1)
- Aluminium III [water, surface water]: 0.00173846 kg; lognormal variance with pedigree 0.122, pedigree (1,1,5,5,1)
- Chromium III [water, surface water]: 6.00559e-6 kg; lognormal variance with pedigree 0.122, pedigree (1,1,5,5,1)
- Copper ion [water, surface water]: 2.05455e-6 kg; lognormal variance with pedigree 0.122, pedigree (1,1,5,5,1)
- Fluoride [water, surface water]: 0.000173846 kg; lognormal variance with pedigree 0.122, pedigree (1,1,5,5,1)
- Hydrocarbons, unspecified [water, surface water]: 9.64056e-5 kg; lognormal variance with pedigree 0.122, pedigree (1,1,5,5,1)
- Nitrate [water, surface water]: 0.00395105 kg; lognormal variance with pedigree 0.122, pedigree (1,1,5,5,1)
- Phosphate [water, surface water]: 0.000537343 kg; lognormal variance with pedigree 0.122, pedigree (1,1,5,5,1)
- Thorium-234 [water, surface water]: 0.0048993 kBq; lognormal variance with pedigree 0.122, pedigree (1,1,5,5,1)
- Uranium alpha [water, surface water]: 1.29594e-5 kBq; lognormal variance with pedigree 0.122, pedigree (1,1,5,5,1)
- Water [water, unspecified]: 0.00387203 m3; lognormal variance with pedigree 0.0427, pedigree (2,2,5,5,1)
- Zinc II [water, surface water]: 6.00559e-5 kg; lognormal variance with pedigree 0.122, pedigree (1,1,5,5,1)

## Sampling procedure
Literature

## Extrapolations
none This dataset has been copied from an original dataset covering the geography RU. The uncertainty has been adjusted accordingly.

## Review by Thomas Nemecek 2007-08-24
Passed.
