# iron(III) chloride production, product in 40% solution state

Dataset: EcoSpold 2, unit process
Geography: RoW
Time period: 1995-01-01 to 2022-12-31
Technology level: current
Classification: ISIC rev.4 ecoinvent: 2011:Manufacture of basic chemicals
Classification: EcoSpold01Categories: chemicals/inorganics
Synonyms: iron trichloride; iron chloride
Tags: ConvertedDataset
Scenario: Business-as-Usual
System model: Allocation, cut-off by classification
Share of production covered: 80 %
Generated by: Alex Primas
Published in: Althaus H.-J. 2007
Database: ecoinvent
isCopyrightProtected: true
accessRestrictedTo: 1

## General comment
This dataset represents the production of 1 kg of iron(III) chloride (active substance). The inventory refers to a commercial aqueous solution with a concentration of 40 wt % iron(III) chloride by weight. This equals an iron concentration of 14% by weight in the solution. Raw materials, auxilliaries, energy consumption and emissions are estimated from personal communication with two iron(III) chloride producers and literature data. Infrastructure is included with a default value.
[This dataset is meant to replace the following datasets:]

## Included activities start
From the reception of scrap iron at the factory gate. The iron(III) chloride solution is produced from scrap iron, spent pickling acids, hydrogen chloride and chlorine.

## Included activities end
This activity ends with the production of aqueous iron(III) chloride. Process electricity demand included. No fuel for process heat included due to exothermal process. No credits given for possible heat export. Land use and infrastructure of plant only roughly included.

## Geography
The data are based on production processes used in Switzerland, but are assumed valid at the global scale.

## Technology
Commercial production of iron(III) chloride solutions in Switzerland is mainly based on dissolving iron in hydrochloric acid and oxidizing the resulting iron(II) chloride with chlorine. In this process also spent pickling acid solutions containing iron(II) chloride are used as chlorine and iron source.
In 1994, the production output (as 100% FeCl3) in Europe was estimated to 150'000 t FeCl3 per year. For Switzerland the consumption of 40% iron(III) chloride solution will account for about 20-25'000 t per year which equals 8-10'000 t FeCl3 (100%) per year.
Commercial forms of iron(III) chloride include sublimed anhydrous iron(III) chloride (99% FeCl3), iron(III) chloride hexahydrate (ca. 60% FeCl3), and iron(III) chloride solution (ca. 40% FeCl3). The major commercial form is a solution with 40 wt % FeCl3. For this inventory only the 40% iron(III) chloride solution was investigated. It was assumed that the main supply for Switzerland is produced within Switzerland and therefore imports were neglected.
Iron(III) chloride solutions are prepared by dissolving iron in hydrochloric acid and oxidizing the resulting iron(II) chloride with chlorine. In a continuous, closed-cycle process, iron(III) chloride solution is reduced with iron and the resulting iron(II) chloride solution is reoxidized with chlorine. In about 80% of the iron(III) chloride production in Switzerland, spent pickling acids are used as additional iron source. In average 92% of the iron used for iron(III) chloride production in Switzerland origins from iron scrap and only about 8% has pickling acid as iron source. Only few process data were available for the production of iron(III) chloride operating without pickling acid use. Therefore the same emissions and wastes were applied as for the process using pickling acids. The data presented in this inventory represent an average production process for iron(III) chloride in Switzerland. A simplified process scheme of iron(III) chloride production is shown below.
Reference:
Ullmann (2001) Iron Compounds, Iron Choride, Iron(III) Chloride, Chapter 2.1. In: Ullmann's Encyclopedia of Industrial Chemistry, Sixth Edition, June-2001 Electronic Release (ed. Wildermuth E., Stark H., Silver J. and Rituper R.). 6 th Electronic Release Edition. Wiley InterScience, New York, Online-Version under: http://www.mrw.interscience.wiley.com/ueic/ull_search_fs.html

## Parameters
- fraction, cooling water, cooling pond system, to air: 0.032 dimensionless; name fraction_CW_CP_to_air; lognormal variance with pedigree 0.0413, pedigree (2,3,1,3,1)
  Calculated based on literature value (Scown, C.D., 2011, Water Footprint of U.S. Transportation Fuels and supplying information of the article) (Vionnet, S., Quantis Water Database - Technical Report, 2012).
- fraction, cooling water, once-through system, to air: 0.004 dimensionless; name fraction_CW_OT_to_air; lognormal variance with pedigree 0.0413, pedigree (2,3,1,3,1)
  (same comment as for fraction, cooling water, cooling pond system, to air)
- fraction, cooling water, recirculating system, to air: 0.771 dimensionless; name fraction_CW_R_to_air; lognormal variance with pedigree 0.0413, pedigree (2,3,1,3,1)
  (same comment as for fraction, cooling water, cooling pond system, to air)
- fraction, cooling water, to air: 0.3875 dimensionless; name fraction_CW_to_air; = (0.5*fraction_CW_OT_to_air)+(0.5*fraction_CW_R_to_air); lognormal variance with pedigree 0.092025, pedigree (4,4,3,2,4)
  Calculated value based on literature value (see comments of the other parametres present in this dataset) and expert opinion. In the case when no industry/literature data are available about the type of cooling or directly fraction, cooling water, to air specific for the process a default assumption is applied. It is assumed that the once-through cooling system is used in 50% of all cases and recirculating system is used in another 50% of all cases.
- fraction, process water, to air: 0.205 dimensionless; lognormal variance with pedigree 0.092025, pedigree (4,4,3,2,4)
- fraction, tap water, to air: 0.205 dimensionless; lognormal variance with pedigree 0.092025, pedigree (4,4,3,2,4)

## Reference product
- iron (III) chloride, without water, in 40% solution state: 1 kg; By-product classification allocatable product; CPC 34240: Phosphates of triammonium; salts and peroxysalts of inorganic acids and metals n.e.c.
  production volume 3.96633 kg
  properties: carbon allocation 0 kg, carbon content 0, carbon content, fossil 0, carbon content, non-fossil 0, dry mass 1 kg, price 0.33 EUR2005, water content 0, water in wet mass 0 kg, wet mass 1 kg

## Inputs from technosphere
- chemical factory, organics: 1e-9 unit; lognormal variance with pedigree 0.47, pedigree (5,5,5,5,4)
- chlorine, gaseous: 0.598 kg; lognormal variance with pedigree 0.0141, pedigree (3,2,5,5,1)
  properties: dry mass 1 kg, wet mass 1 kg
- electricity, medium voltage: 0.00074736, 0.00109884, 0.00055147, 0.010082, 0.000166969, 3.27235e-5, 0.00239909, 0.00352157 kWh (8 suppliers, which the file names only by identifier); sum of these 0.0186 kWh; lognormal variance with pedigree 0.016, pedigree (3,4,5,5,1)
- hydrochloric acid, without water, in 30% solution state: 0.022 kg; lognormal variance with pedigree 0.1001, pedigree (4,2,5,5,4)
  properties: dry mass 1 kg, heating value, net 3.32 MJ, wet mass 1 kg
- iron scrap, sorted, pressed: 0.328 kg; lognormal variance with pedigree 0.0141, pedigree (3,2,5,5,1)
  properties: dry mass 1 kg, wet mass 1 kg
- sludge from FeCl3 production: -0.006 kg; lognormal variance with pedigree 0.0321, pedigree (3,2,1,5,3)
  properties: dry mass 0.7 kg, water content 0.428571, wet mass 1 kg
- tap water: 0.0576549, 0.00426638, 0.659774, 0.0114933, 0.00138349, 0.00228644, 0.491641, 0.00149988 kg (8 suppliers, which the file names only by identifier); sum of these 1.23 kg; lognormal variance with pedigree 0.0321, pedigree (3,2,5,5,3)
  properties: carbon content, fossil 0.00178991, dry mass 0.000337476 kg, water content 2962.17, wet mass 1 kg

## Inputs from nature
- Water, cooling, unspecified natural origin [natural resource, in water]: 0.00577 m3; lognormal variance with pedigree 0.0321, pedigree (3,2,5,5,3)

## Emissions to nature
- Water [air, unspecified]: 0.00248803 m3; lognormal variance with pedigree 0.0427, pedigree (2,2,5,5,1)
- Chloride [water, surface water]: 0.0002 kg; lognormal variance with pedigree 0.0721, pedigree (3,2,5,5,3)
- Iron ion [water, surface water]: 0.0001 kg; lognormal variance with pedigree 0.0721, pedigree (3,2,5,5,3)
- Water [water, unspecified]: 0.00451197 m3; lognormal variance with pedigree 0.0427, pedigree (2,2,5,5,1)

## Sampling procedure
Data for resources, energy, water use, wastes and water emissions based on producer in Switzerland. Further data from literature used for energy demand. Infrastructure only rougly estimated with a proxy-process.

## Extrapolations
This dataset has been copied from an original dataset covering the geography CH, which represents about 80% of the production in Switzerland. The uncertainty has been adjusted accordingly.
The highest uncertainties exist for the emission data due to variations of the source materials. Also the data for energy use contains uncertainties because no complete energy balance of the plants was available. In general, the infrastructure data has a high uncertainty because of missing specific data, and an approximation with an average chemical production plant was used.

## Review by Roland Hischier 2003-08-26
Passed.
