# azodicarbonamide production

Dataset: EcoSpold 2, unit process
Geography: RoW
Time period: 2015-01-01 to 2022-12-31
Technology level: current
Classification: ISIC rev.4 ecoinvent: 2011:Manufacture of basic chemicals
Synonyms: diazenedicarboxamide; azobisformamide; ADC; azodicarboxamide; ADA; diazenedicarbonic acid amide; 1,1'-azobisformamide; azobiscarbonamide; azodicarbodiamide; azodiformamide; azobiscarboxamide
Scenario: Business-as-Usual
System model: Allocation, cut-off by classification
Generated by: Lucia Valsasina
Database: ecoinvent
isCopyrightProtected: true
accessRestrictedTo: 1

## General comment
This activity represents the production of azodicarbonamide. The product is a synthetic yellow/orange crystalline solid (Cary et al. 1999). This product is mainly used as a blowing agent for the manufacturing of polymeric foams (Bakery and Rahimnejad 2013).
Reference(s):
Cary, R. et al. 1999. AZODICARBONAMIDE. Concise International Chemical Assessment Document 16. World Health Organization, Geneva. Retrieved from: http://www.who.int/ipcs/publications/cicad/en/cicad16.pdf, accessed 13 January 2017
Bakeri, GH. and Rahimnejad, M. 2013. KINETICS STUDY OF HYDRAZODICARBONAMIDE SYNTHESIS REACTION. Chemical Industry & Chemical Engineering Quarterly, vol 2, 19, pp 273−279
For more information on the model please refer to the dedicate ecoinvent report, access it in the Report section of ecoQuery (http://www.ecoinvent.org/login-databases.html)

## Included activities start
The activity starts when the raw materials enter the process.

## Included activities end
Materials entering the process are included as well as energy uses, infrastructure and emissions.

## Geography
The inputs to the process are calculated based on stoichiometry and literature data, they are therefore considered to be valid for the chosen geography. The inputs of heat, electricity, water, factory and nitrogen are mostly taken as average of industry data. Industry data values are a 5-year average of data (2011 - 2015) published by the Gendorf factory (Gendorf, 2016, Umwelterklärung, www.gendorf.de), (Gendorf, 2015, Umwelterklärung, www.gendorf.de), (Gendorf, 2014, Umwelterklärung, www.gendorf.de). The Gendorf factory is based in Germany, it produces a wide range of chemical substances. The factory produced 1657400 tonnes of chemical substances in the year 2015 (Gendorf, 2016, Umwelterklärung, www.gendorf.de) and 740000 tonnes of intermediate products. Given the range of chemicals produced by the german site, the values are used for the GLO geography, with uncertainty adjusted accordingly.

## Technology
Azodicarbonamide is produced from the reaction of hydrazine sulfate and urea. Sulfuric acid is used as a catalyst in the reaction. In a second step sodium hypochlorite is added to obtain the final product (Cary et al. 1999; Bakery and Rahimnejad 2013). Hydrogen sulfide is created during the reaction, it is here assumed that it is neutralized with an additional mole of sodium hypochlorite, producing additional Na and Cl. The remaining Sulphur is included in the process as by-product of inert waste.
Chemical reaction:
H6N2O4S + 2CH4N2O + 2NaOCl -> C2H4N4O2 + 4H2O + 2Na + 2Cl
Bakery et al. (2013) summarize other methods found in literature to product this product, which are the following: “1. Reaction of hydrazine or its salts with urea in the presence of a non-oxidizing acids such as sulfuric acid, phosphoric acid or hydrochloric acid. 2. Reaction of hydrazine or its salts with urea in the presence of an alkali and separating the produced ammonia from the reaction mixture. 3. Reaction of a ketazine with urea in the presence of a non-oxidizing acid. 4. Reaction of a ketazine with urea in the presence of an alkali and separating the produced ammonia and ketone and the un-hydrolyzed ketazine from reaction mixture. 5. Reaction of urea with semicarbazide.” (Bakery et al. 2013, pp. 273).
This inventory representing production of a particular chemical compound is at least partially based on a generic model on the production of chemicals. The data generated by this model have been improved by compound-specific data when available.
The model on production of chemicals is using specific industry or literature data wherever possible and more generic data on chemical production processes to fill compound-specific data gaps when necessary. The basic principles of the model have been published in literature (Hischier 2005, Establishing Life Cycle Inventories of Chemicals Based on Differing Data Availability). The model has been updated and extended with newly available data from the chemical industry.
In the model, unreacted fractions are treated in a waste treatment process, and emissions reported are after a waste treatment process that is included in the scope of this dataset. For volatile reactants, a small level of evaporation is assumed. Solvents and catalysts are mostly recycled in closed-loop systems within the scope of the dataset and reported flows are for losses from this system.
The main source of information for the values for heat, electricity, water (process and cooling), nitrogen, chemical factory is industry data from Gendorf. The values are a 5-year average of data (2011 - 2015) published by the Gendorf factory (Gendorf, 2016, Umwelterklärung, www.gendorf.de), (Gendorf, 2015, Umwelterklärung, www.gendorf.de), (Gendorf, 2014, Umwelterklärung, www.gendorf.de). The Gendorf factory is based in Germany, it produces a wide range of chemical substances. The factory produced 1657400 tonnes of chemical substances in the year 2015 (Gendorf, 2016, Umwelterklärung, www.gendorf.de) and 740000 tonnes of intermediate products.
Reference(s):
Hischier, R. (2005) Establishing Life Cycle Inventories of Chemicals Based on Differing Data Availability (9 pp). The International Journal of Life Cycle Assessment, Volume 10, Issue 1, pp 59–67. 10.1065/lca2004.10.181.7
Gendorf (2016) Umwelterklärung 2015, Werk Gendorf Industriepark, www.gendorf.de
Cary, R. et al. 1999. AZODICARBONAMIDE. Concise International Chemical Assessment Document 16. World Health Organization, Geneva. Retrieved from: http://www.who.int/ipcs/publications/cicad/en/cicad16.pdf, accessed 13 January 2017
Bakeri, GH. and Rahimnejad, M. 2013. KINETICS STUDY OF HYDRAZODICARBONAMIDE SYNTHESIS REACTION. Chemical Industry & Chemical Engineering Quarterly, vol 2, 19, pp 273−279
For more information on the model please refer to the dedicate ecoinvent report, access it in the Report section of ecoQuery (http://www.ecoinvent.org/login-databases.html)

## Time period
The activity is based on stoichiometry and literature data, it is therefore considered not to change significantly over time in terms of inputs. The inputs of heat, electricity, water, factory and nitrogen are mostly taken as average of industry data. Industry data values are a 5-year average of data (2011 - 2015) published by the Gendorf factory (Gendorf, 2016, Umwelterklärung, www.gendorf.de), (Gendorf, 2015, Umwelterklärung, www.gendorf.de), (Gendorf, 2014, Umwelterklärung, www.gendorf.de). The Gendorf factory is based in Germany, it produces a wide range of chemical substances. The factory produced 1657400 tonnes of chemical substances in the year 2015 (Gendorf, 2016, Umwelterklärung, www.gendorf.de) and 740000 tonnes of intermediate products. The time period is therefore set based on the years from Gendorf reference.

## Reference product
- azodicarbonamide: 1 kg; By-product classification allocatable product; CPC 34150: Amine-function compounds; oxygen-function amino-compounds, except lysine and its esters and salts thereof and […]
  production volume 9.912e6 kg
  properties: carbon allocation 0.206944 kg, carbon content 0.206944, carbon content, fossil 0.206944, carbon content, non-fossil 0, dry mass 1 kg, heating value, net 10.45 MJ, price 43.2768 EUR2005, water content 0, water in wet mass 0 kg, wet mass 1 kg

## Inputs from technosphere
- chemical factory, organics: 4e-10 unit; lognormal variance with pedigree 0.3098, pedigree (2,3,2,4,3)
- electricity, medium voltage: 0.0295802, 0.0148452, 0.271401, 0.0044947, 0.000880897, 0.0947985 kWh (6 suppliers, which the file names only by identifier); sum of these 0.416 kWh; lognormal variance with pedigree 0.0104, pedigree (2,3,2,4,3)
- heat, district or industrial, natural gas: 2.11524, 0.0347588 MJ (2 suppliers, which the file names only by identifier); sum of these 2.15 MJ; lognormal variance with pedigree 0.0104, pedigree (2,3,2,4,3)
  properties: heating value, net 1 MJ
- heat, from steam, in chemical industry: 0.2 MJ; lognormal variance with pedigree 0.0104, pedigree (2,3,2,4,3)
  properties: heating value, net 1 MJ
- hydrazine sulfate: 1.18 kg; lognormal variance with pedigree 0.0104, pedigree (2,3,2,4,3)
  properties: dry mass 1 kg, heating value, net 5.59 MJ, wet mass 1 kg
- inert waste: -0.032 kg; lognormal variance with pedigree 0.009825, pedigree (2,3,1,2,3)
  properties: dry mass 1 kg, wet mass 1 kg
- nitrogen, liquid: 0.019 kg; lognormal variance with pedigree 0.0104, pedigree (2,3,2,4,3)
  properties: dry mass 1 kg, wet mass 1 kg
- sodium hypochlorite, without water, in 15% solution state: 1.35011 kg; lognormal variance with pedigree 0.0099, pedigree (2,3,2,3,3)
  properties: dry mass 1 kg, wet mass 1 kg
- sulfuric acid: 0.889404 kg; lognormal variance with pedigree 0.0099, pedigree (2,3,2,3,3)
  properties: dry mass 1 kg, wet mass 1 kg
- tap water: 0.00203022, 0.000150233, 0.0232328, 0.000404717, 4.8717e-5, 8.05128e-5, 5.28156e-5 kg (7 suppliers, which the file names only by identifier); sum of these 0.026 kg; lognormal variance with pedigree 0.0104, pedigree (2,3,2,4,3)
  properties: carbon content, fossil 0.00178991, dry mass 0.000337476 kg, water content 2962.17, wet mass 1 kg
- urea: 0.549986, 0.0695578, 0.469649 kg (3 suppliers, which the file names only by identifier); sum of these 1.08919 kg; lognormal variance with pedigree 0.0099, pedigree (2,3,2,3,3)
  properties: carbon content, fossil 0.2, dry mass 1 kg, wet mass 1 kg
- wastewater, average: -2.69042e-6, -9.57892e-9 m3 (2 suppliers, which the file names only by identifier); sum of these -2.7e-6 m3; lognormal variance with pedigree 0.0104, pedigree (2,3,1,4,3)
  properties: carbon content, non-fossil 0.194039, dry mass 0.346837 kg, water content 2882.2, wet mass 1000 kg

## Inputs from nature
- Water, cooling, unspecified natural origin [natural resource, in water]: 0.0164 m3; lognormal variance with pedigree 0.0104, pedigree (2,3,2,4,3)
- Water, river [natural resource, in water]: 0.00086 m3; lognormal variance with pedigree 0.0104, pedigree (2,3,2,4,3)
- Water, well, in ground [natural resource, in water]: 0.00083 m3; lognormal variance with pedigree 0.0104, pedigree (2,3,2,4,3)

## Emissions to nature
- Carbon dioxide, fossil [air, unspecified]: 0.0379135 kg; lognormal variance with pedigree 0.0104, pedigree (2,3,2,4,3)
- Nitrogen [air, unspecified]: 0.019 kg; lognormal variance with pedigree 0.0104, pedigree (2,3,2,4,3)
- Water [air, unspecified]: 0.0014 m3; lognormal variance with pedigree 0.0104, pedigree (2,3,2,4,3)
- BOD5, Biological Oxygen Demand [water, unspecified]: 0.00208931 kg; lognormal variance with pedigree 0.218, pedigree (4,5,5,5,5)
- COD, Chemical Oxygen Demand [water, unspecified]: 0.00208931 kg; lognormal variance with pedigree 0.218, pedigree (4,5,5,5,5)
- Chloride [water, unspecified]: 0.641376 kg; lognormal variance with pedigree 0.0104, pedigree (2,3,2,4,3)
- DOC, Dissolved Organic Carbon [water, unspecified]: 0.000544092 kg; lognormal variance with pedigree 0.218, pedigree (4,5,5,5,5)
- Hydrazine [water, unspecified]: 0.000772185 kg; lognormal variance with pedigree 0.0104, pedigree (2,3,2,4,3)
- Hypochlorite [water, unspecified]: 0.0023329 kg; lognormal variance with pedigree 0.0104, pedigree (2,3,2,4,3)
- Nitrate [water, unspecified]: 0.160248 kg; lognormal variance with pedigree 0.0104, pedigree (2,3,2,4,3)
- Sodium I [water, unspecified]: 0.83286 kg; lognormal variance with pedigree 0.0104, pedigree (2,3,2,4,3)
- Sulfate [water, unspecified]: 0.00435554 kg; lognormal variance with pedigree 0.0104, pedigree (2,3,2,4,3)
- Sulfur [water, unspecified]: 0.0293608 kg; lognormal variance with pedigree 0.0104, pedigree (2,3,2,4,3)
- TOC, Total Organic Carbon [water, unspecified]: 0.000544092 kg; lognormal variance with pedigree 0.218, pedigree (4,5,5,5,5)
- Urea [water, unspecified]: 0.00272298 kg; lognormal variance with pedigree 0.0104, pedigree (2,3,2,4,3)
- Water [water, unspecified]: 0.0167 m3; lognormal variance with pedigree 0.0104, pedigree (2,3,2,4,3)

## Sampling procedure
Literature data and stochiometric calculation.

## Extrapolations
This dataset is extrapolated from the european dataset. The uncertainty has been adjusted accordingly.

## Review by Emilia Moreno Ruiz 2017-08-10
This dataset was additionally reviewed in a separate review process by Eric Johnson of Atlantic Consulting as well as Emilia Moreno Ruiz and Gregor Wernet of ecoinvent.
