# ethyl tert-butyl ether production, from bioethanol

Dataset: EcoSpold 2, unit process
Geography: RoW
Time period: 1998-01-01 to 2022-12-31
Technology level: current
Classification: EcoSpold01Categories: biomass/fuels
Classification: ISIC rev.4 ecoinvent: 2011:Manufacture of basic chemicals
Synonyms: ethyl tertio butyl ether; 2-ethoxy-2-methylpropane; 2-methyl-2-ethoxypropane; ETBE; ethyl tertiary butyl ether; ethyl tert-butyl ether; ethyl tert-butyl oxide; tert-butyl ethyl ether
Tags: ConvertedDataset
Scenario: Business-as-Usual
System model: Allocation, cut-off by classification
Share of production covered: 0 %
Generated by: Edgard Gnansounou
Published in: Jungbluth N. 2007
Database: ecoinvent
isCopyrightProtected: true
accessRestrictedTo: 1

## General comment
Inventory refers to the production of 1 kg ETBE, at the oil refinery. ETBE can be incorporated at up to 15% vol. in gasoline, as an oxygenate, according to the current (2005) European Norms. Anhydrous bioethanol is produced from rye, in the RER context. Naphtha is used as a proxy dataset for isobutene. This process is applied in France and Spain and possibly in Germany. Fossil and biogenic carbon contents are respectively 45.4% and 25.4%, according to the respective shares of isobutene (53% wt.) and ethanol (47% wt.).
[This dataset was already contained in the ecoinvent database version 2. It was not individually updated during the transfer to ecoinvent version 3. Life Cycle Impact Assessment results may still have changed, as they are affected by changes in the supply chain, i.e. in other datasets. This dataset was generated following the ecoinvent quality guidelines for version 2. It may have been subject to central changes described in the ecoinvent version 3 change report (http://www.ecoinvent.org/database/ecoinvent-version-3/reports-of-changes/), and the results of the central updates were reviewed extensively. The changes added e.g. consistent water flows and other information throughout the database. The documentation of this dataset can be found in the ecoinvent reports of version 2, which are still available via the ecoinvent website. The change report linked above covers all central changes that were made during the conversion process.]

## Included activities end
This process includes the production of ethyl tert-butyl ether (ETBE), at the oil refinery. ETBE is the result of the reaction between 45.1% wt. anhydrous ethanol from biomass and 54.9% wt. isobutene (side-product of oil refineries).

## Geography
Mainly based on EU studies. ETBE is largely produced in France, Spain and possibly soon in Germany.

## Technology
Production of ETBE according to the IFP technology

## Time period
Data from 1998 to 2002, current technology

## Parameters
- fraction, process water, to air: 0.15 dimensionless; lognormal variance with pedigree 0.092025, pedigree (4,4,3,2,4)
- fraction, tap water, to air: 0.15 dimensionless; lognormal variance with pedigree 0.092025, pedigree (4,4,3,2,4)

## Reference product
- ethyl tert-butyl ether: 1 kg; By-product classification allocatable product; CPC 35491: Biodiesel
  production volume 2.67763 kg
  properties: carbon allocation 0.699 kg, carbon content 0.699, carbon content, fossil 0.454, carbon content, non-fossil 0.245, dry mass 1 kg, heating value, net 37.97 MJ, price 1.57 EUR2005, water content 0, water in wet mass 0 kg, wet mass 1 kg

## Inputs from technosphere
- electricity, medium voltage: 0.00170463, 0.000855491, 0.0156401, 0.000259018, 5.07638e-5, 0.00546299 kWh (6 suppliers, which the file names only by identifier); sum of these 0.023973 kWh; lognormal variance with pedigree 0.0121, pedigree (1,2,5,5,1)
- ethanol, without water, in 99.7% solution state, from fermentation: 0.47023 kg; lognormal variance with pedigree 0.0121, pedigree (1,2,5,5,1)
  properties: carbon content, non-fossil 0.521739, dry mass 1 kg, heating value, net 28.1 MJ, wet mass 1 kg
- heat, district or industrial, natural gas: 2.82232, 0.046378 MJ (2 suppliers, which the file names only by identifier); sum of these 2.8687 MJ; lognormal variance with pedigree 0.0121, pedigree (1,2,5,5,1)
  properties: heating value, net 1 MJ
- naphtha: 0.00909545, 0.428776, 0.000726206, 0.0188625, 0.0695427, 0.002997 kg (6 suppliers, which the file names only by identifier); sum of these 0.53 kg; lognormal variance with pedigree 0.0121, pedigree (1,2,5,5,1)
  properties: carbon content, fossil 0.919743, dry mass 1 kg, heating value, net 45 MJ, wet mass 1 kg
- petroleum refinery: 4.933e-11 unit; lognormal variance with pedigree 0.3121, pedigree (1,2,5,5,1)
- tap water: 0.0484128, 0.00358248, 0.554013, 0.00965093, 0.00116171, 0.00191992, 0.00125945 kg (7 suppliers, which the file names only by identifier); sum of these 0.62 kg; lognormal variance with pedigree 0.0121, pedigree (1,2,5,5,1)
  properties: carbon content, fossil 0.00178991, dry mass 0.000337476 kg, water content 2962.17, wet mass 1 kg
- wastewater, average: -0.0006178, -2.1996e-6 m3 (2 suppliers, which the file names only by identifier); sum of these -0.00062 m3; lognormal variance with pedigree 0.0226, pedigree (2,4,1,5,3)
  properties: carbon content, non-fossil 0.194039, dry mass 0.346837 kg, water content 2882.2, wet mass 1000 kg

## Emissions to nature
- Ethanol [air, urban air close to ground]: 0.000235 kg; lognormal variance with pedigree 0.0862, pedigree (4,5,5,5,3)
- Water [air, unspecified]: 9.3e-5 m3; lognormal variance with pedigree 0.0427, pedigree (2,2,5,5,1)

## Extrapolations
none This dataset has been copied from an original dataset covering the geography RER. The uncertainty has been adjusted accordingly.

## Review by Niels Jungbluth 2006-07-12
Passed.
none
