# gypsum plasterboard production

Dataset: EcoSpold 2, unit process
Geography: RoW
Time period: 1997-01-01 to 2022-12-31
Technology level: current
Classification: EcoSpold01Categories: construction materials/coverings
Classification: ISIC rev.4 ecoinvent: 2394:Manufacture of cement, lime and plaster
Tags: ConvertedDataset
Scenario: Business-as-Usual
System model: Allocation, cut-off by classification
Generated by: Hans-Jörg Althaus
Published in: Kellenberger D. 2004
Database: ecoinvent
isCopyrightProtected: true
accessRestrictedTo: 1

## General comment
produced 100% from natural gypsum (no FGD). Energy consumption is extrapolated from production of solid gypsum board
[This dataset was already contained in the ecoinvent database version 2. It was not individually updated during the transfer to ecoinvent version 3. Life Cycle Impact Assessment results may still have changed, as they are affected by changes in the supply chain, i.e. in other datasets. This dataset was generated following the ecoinvent quality guidelines for version 2. It may have been subject to central changes described in the ecoinvent version 3 change report (http://www.ecoinvent.org/database/ecoinvent-version-3/reports-of-changes/), and the results of the central updates were reviewed extensively. The changes added e.g. consistent water flows and other information throughout the database. The documentation of this dataset can be found in the ecoinvent reports of version 2, which are still available via the ecoinvent website. The change report linked above covers all central changes that were made during the conversion process.]

## Included activities end
production of board (incl. drying)

## Geography
data for Switzerland

## Technology
Average technology for consumption in Switzerland

## Parameters
- fraction, process water, to air: 0.59 dimensionless; lognormal variance with pedigree 0.092025, pedigree (4,4,3,2,4)
- fraction, tap water, to air: 0.59 dimensionless; lognormal variance with pedigree 0.092025, pedigree (4,4,3,2,4)

## Reference product
- gypsum plasterboard: 1 kg; By-product classification allocatable product; CPC 37530: Articles of plaster or of compositions based on plaster
  production volume 3.96633 kg
  properties: carbon allocation 0.0200104 kg, carbon content 0.0200104, carbon content, fossil 0.00113571, carbon content, non-fossil 0.0188747, dry mass 1 kg, heating value, net 0 MJ, price 0.18 EUR2005, water content 0, water in wet mass 0 kg, wet mass 1 kg

## Inputs from technosphere
- alkylbenzene sulfonate, linear, petrochemical: 9.68e-6 kg; lognormal variance with pedigree 0.0028, pedigree (2,1,5,5,1)
  properties: carbon content, fossil 0.407018, dry mass 1 kg, heating value, net 28.88 MJ, wet mass 1 kg
- corrugated board box: 0.0334513, 0.0144118, 0.000536842 kg (3 suppliers, which the file names only by identifier); sum of these 0.0484 kg; lognormal variance with pedigree 0.0028, pedigree (2,1,5,5,1)
  properties: carbon content, fossil 0.00365437, carbon content, non-fossil 0.38, dry mass 0.945 kg, heating value, net 12.86 MJ, water content 0.0582011, wet mass 1 kg
- electricity, medium voltage: 0.00376492, 0.00553557, 0.0027781, 0.0507893, 0.000841128, 0.000164849, 0.0120857, 0.0177404 kWh (8 suppliers, which the file names only by identifier); sum of these 0.0937 kWh; lognormal variance with pedigree 0.0208, pedigree (2,1,5,5,3)
- glass fibre: 0.000161 kg; lognormal variance with pedigree 0.0028, pedigree (2,1,5,5,1)
  properties: dry mass 1 kg, wet mass 1 kg
- heat, district or industrial, other than natural gas: 1.25937, 0.000583443, 0.0320471 MJ (3 suppliers, which the file names only by identifier); sum of these 1.292 MJ; lognormal variance with pedigree 0.0208, pedigree (2,1,5,5,3)
  properties: heating value, net 1 MJ
- potato starch: 0.0029 kg; lognormal variance with pedigree 0.0028, pedigree (2,1,5,5,1)
  properties: carbon content, non-fossil 0.46, dry mass 0.8 kg, heating value, net 10.66 MJ, water content 0.25, wet mass 1 kg
- silicone product: 0.000129 kg; lognormal variance with pedigree 0.0028, pedigree (2,1,5,5,1)
  properties: carbon content, fossil 0.324324, dry mass 1 kg, heating value, net 9.83 MJ, wet mass 1 kg
- stucco: 0.811 kg; lognormal variance with pedigree 0.0028, pedigree (2,1,5,5,1)
  properties: dry mass 1 kg, wet mass 1 kg
- tap water: 0.0170621, 0.00126257, 0.19525, 0.00340127, 0.000409422, 0.000676637, 0.145494, 0.000443866 kg (8 suppliers, which the file names only by identifier); sum of these 0.364 kg; lognormal variance with pedigree 0.0208, pedigree (2,1,5,5,3)
  properties: carbon content, fossil 0.00178991, dry mass 0.000337476 kg, water content 2962.17, wet mass 1 kg
- wooden board factory, organic bonded boards: 1.67e-11 unit; lognormal variance with pedigree 0.68, pedigree (5,5,5,5,5)

## Inputs from nature
- Water, unspecified natural origin [natural resource, in water]: 0.000182 m3; lognormal variance with pedigree 0.0208, pedigree (2,1,5,5,3)

## Emissions to nature
- Water [air, unspecified]: 0.00032214 m3; lognormal variance with pedigree 0.0427, pedigree (2,2,5,5,1)
- Water [water, unspecified]: 0.00022386 m3; lognormal variance with pedigree 0.0427, pedigree (2,2,5,5,1)

## Sampling procedure
environmental report

## Extrapolations
none This dataset has been copied from an original dataset covering the geography CH. The uncertainty has been adjusted accordingly.

## Review by Roberto Dones 2004-07-01
passed
