# cationic resin production

Dataset: EcoSpold 2, unit process
Geography: RoW
Time period: 1997-01-01 to 2022-12-31
Technology level: current
Classification: ISIC rev.4 ecoinvent: 2013:Manufacture of plastics and synthetic rubber in primary forms
Synonyms: strong acidic cation exchange resin; cation resin; SAC; cation exchange resin
Scenario: Business-as-Usual
System model: Allocation, cut-off by classification
Generated by: Alex Primas
Published in: Althaus H.-J. 2007
Database: ecoinvent
isCopyrightProtected: true
accessRestrictedTo: 1

## General comment
This dataset represents the production of 1 kg of moist cation-exchange resin which is used for water treatment. The moisture content of the assessed resins is 50 wt%, corresponding to a resin with 6-8 wt% divinylbenzene (DVB) crosslinking. The bulk density of the moist (hydrated) resin is 1.28 kg/L.
Due to a lack of production data, this dataset is based on stoichiometric calculations, as well approximations based on data from a large chemical plant (Gendorf 2016).
References:
Althaus H.-J., Chudacoff M., Hischier R., Jungbluth N., Osses M. and Primas A. (2007) Life Cycle Inventories of Chemicals. ecoinvent report No. 8, v2.0. EMPA Dübendorf, Swiss Centre for Life Cycle Inventories, Dübendorf, CH.
Gendorf (2016) Umwelterklärung 2015, Werk Gendorf Industriepark, www.gendorf.de.

## Included activities start
The activity starts when the raw materials enter the process.

## Included activities end
This activity ends with the production of 1 kg of cation-exchange resin. The raw materials and chemicals used for production are included, as well as estimated emissions and wastes from production (incomplete), and estimated energy demand and infrastructure of the plant.

## Geography
The data used has no specific geographical origin as it is based on stoechiometric calculations and estimations. It is assumed to be representative of the production processes in this geography. Some values are based on data from a large chemical factory located in Germany. These are assumed to be valid for this geography.

## Technology
This dataset models the production of a strong acidic cation exchanger resin (hydrogen form) for water treatment, with a process yield of 95%.
The production process starts with the polymerisation of the styrene and divinylbenzene (DVB), which are used as a cross-linking agent and are mixed in a suspension system. This process leads to hardened spherical plastic beads. Standard resins used for water treatment processes are 8 wt-% DVB cross-linked. In this inventory the production of this cross-linked copolymer beads was approximated with linear polystyrene.
The copolymer is then dried and screened to meet the resin specifications. The next production step is the sulfonation of the copolymer to produce the functional groups needed for ion exchange. In this step the copolymer is treated with concentrated sulphuric acid or chlorosulfonic acid under elevated temperatures (about 80 °C). The last step consists in rinsing the functionalized copolymer. This is performed by hot water washing and steaming the resin to reduce the amount of organic compounds left in the resin from the manufacturing process. At this point, the cation resin is in the hydrogen form which is the form desired for this inventory. If the resin is needed in a sodium form (Na+), it has to be neutralised with NaOH. This neutralisation step is not included in this inventory.
Reference:
Althaus H.-J., Chudacoff M., Hischier R., Jungbluth N., Osses M. and Primas A. (2007) Life Cycle Inventories of Chemicals. ecoinvent report No. 8, v2.0. EMPA Dübendorf, Swiss Centre for Life Cycle Inventories, Dübendorf, CH.

## Time period
Time of literature publication. Measurements took place partly before this period. Some values are based on data published by the Gendorf factory that were collected between 2011 and 2015. The time period has been adjusted accordingly. For more details, see the comments of the exchanges.

## Parameters
- fraction, process water, to air: 0.205 dimensionless; name fraction_PW_to_air; lognormal variance with pedigree 0.092025, pedigree (4,4,3,2,4)
  Literature value (Statistics Canada, 2007 & Shaffer, K.H., 2008, Consumptive water use in the Great Lakes Basin, USGS) (Vionnet, S., Quantis Water Database - Technical Report, 2012).
- fraction, water, deionised, to air: 0.205 dimensionless; name fraction_WDI_to_air; = fraction_PW_to_air; lognormal variance with pedigree 0.092025, pedigree (4,4,3,2,4)
  Calculated value. See comment in the other parametres present in this dataset. Deionised water is considered to be always used as process water, thus process water fractions to air are applied to all deionised water input flows to calculate the amount of water consumed in the processes.

## Reference product
- cationic resin: 1 kg; By-product classification allocatable product; CPC 34790: Other plastics in primary forms; ion exchangers
  production volume 3.96 kg
  properties: carbon allocation 0.260803 kg, carbon content 0.521606, carbon content, fossil 0.521606, carbon content, non-fossil 0, dry mass 0.5 kg, heating value, net 6.68 MJ, price 1.6 EUR2005, water content 1, water in wet mass 0.5 kg, wet mass 1 kg

## Inputs from technosphere
- chemical factory, organics: 4e-10 unit; lognormal variance with pedigree 0.3098, pedigree (2,3,2,4,3)
- electricity, medium voltage: 0.0167151, 0.0245763, 0.0123339, 0.225489, 0.00373436, 0.000731881, 0.053657, 0.078762 kWh (8 suppliers, which the file names only by identifier); sum of these 0.416 kWh; lognormal variance with pedigree 0.0104, pedigree (2,3,2,4,3)
- heat, district or industrial, natural gas: 1.55152, 0.0254955, 0.572983 MJ (3 suppliers, which the file names only by identifier); sum of these 2.15 MJ; lognormal variance with pedigree 0.0104, pedigree (2,3,2,4,3)
  properties: heating value, net 1 MJ
- heat, from steam, in chemical industry: 0.2 MJ; lognormal variance with pedigree 0.0104, pedigree (2,3,2,4,3)
  properties: heating value, net 1 MJ
- nitrogen, liquid: 0.019 kg; lognormal variance with pedigree 0.0104, pedigree (2,3,2,4,3)
  properties: dry mass 1 kg, wet mass 1 kg
- polystyrene, general purpose: 0.308 kg; lognormal variance with pedigree 0.278, pedigree (4,5,5,5,5)
  properties: carbon content, fossil 0.923077, dry mass 1 kg, heating value, net 38.67 MJ, wet mass 1 kg
- sulfuric acid: 0.267 kg; lognormal variance with pedigree 0.086, pedigree (4,5,5,5,3)
  properties: dry mass 1 kg, wet mass 1 kg
- waste polystyrene: -1.86036e-5, -0.0116813, -0.00142175, -0.000111491, -4.37287e-5, -4.60499e-5, -8.4319e-6, -0.00166863 kg (8 suppliers, which the file names only by identifier); sum of these -0.015 kg; lognormal variance with pedigree 0.138, pedigree (5,5,5,5,3)
  properties: carbon content, fossil 0.922579, dry mass 0.998 kg, heating value, net 38.67 MJ, water content 0.00200401, wet mass 1 kg
- water, deionised: 1.03619, 3.36381 kg (2 suppliers, which the file names only by identifier); sum of these 4.4 kg; lognormal variance with pedigree 0.032, pedigree (1,1,2,5,1)
  properties: wet mass 1 kg

## Emissions to nature
- Nitrogen [air, unspecified]: 0.019 kg; lognormal variance with pedigree 0.0104, pedigree (2,3,2,4,3)
- Water [air, unspecified]: 0.000902 m3; lognormal variance with pedigree 0.0427, pedigree (2,2,2,5,1)
- Sulfate [water, surface water]: 0.013 kg; lognormal variance with pedigree 0.438, pedigree (5,5,5,5,3)
- Water [water, unspecified]: 0.003498 m3; lognormal variance with pedigree 0.0427, pedigree (2,2,2,5,1)

## Sampling procedure
The data is based on literature and stoechiometric calculations. Some values are calculated based on data from a large chemical factory located in Germany. For more details, see the comments of the exchanges.

## Extrapolations
This dataset has been copied from an original dataset covering the geography CH. The uncertainty has been adjusted accordingly.

## Review by Emilia Moreno Ruiz 2017-08-09
This dataset was additionally reviewed in a separate review process by Eric Johnson of Atlantic Consulting as well as Emilia Moreno Ruiz and Gregor Wernet of ecoinvent.
