# anode production, prebake, for aluminium electrolysis

Dataset: EcoSpold 2, unit process
Geography: RoW
Time period: 2015-01-01 to 2022-12-31
Technology level: current
Classification: EcoSpold01Categories: metals/extraction
Classification: ISIC rev.4 ecoinvent: 2790:Manufacture of other electrical equipment
Scenario: Business-as-Usual
System model: Allocation, cut-off by classification
Share of production covered: 25 %
Generated by: Linlin Wu
Published in: International Aluminium Insitute 2015
Database: ecoinvent
isCopyrightProtected: false
accessRestrictedTo: 1

## General comment
Industry average of prebake anodes for use in the Hall-Héroult process using prebake technology.
[This dataset is meant to replace the following datasets:]

## Included activities start
The unit process begins with the unloading of process materials to the storage areas on site. The operations associated with this unit process include:
* anode mix preparation, anode block forming and baking;
* rodding of baked anodes;
* maintenance and repair of plant and equipment; and
* treatment of process air, liquids and solids.
The original data also accounts for recovery of spent anode materials (anode butts). However, these are recycled in closed loop and are not explicitly accounted for in the inventory, although inputs and outputs of other flows are influenced by this recycling.
Treatment of scrubber sludges are excluded, as there is no corresponding waste treatment in the ecoinvent database.

## Included activities end
The output of this process is rodded anodes to be transported to electrolysis plants employing prebake technology.

## Geography
Data mostly from global surveys by IAI.

## Reference product
- anode, prebake, for aluminium electrolysis: 1 kg; By-product classification allocatable product; CPC 42950: Wire, rods, tubes, plates, electrodes and similar products, of base metal or of metal carbides, coated or core[…]
  production volume 3.21038e9 kg
  properties: carbon allocation 0.875012 kg, carbon content 0.875012, carbon content, fossil 0.875012, carbon content, non-fossil 0, dry mass 1 kg, price 0.15 EUR2005, water content 0, water in wet mass 0 kg, wet mass 1 kg

## Inputs from technosphere
- anode factory: 2.5e-10 unit; lognormal variance with pedigree 0.5, pedigree (5,5,5,5,5)
- cast iron: 0.00582 kg; lognormal variance with pedigree 0.0012, pedigree (1,3,3,1,1)
  properties: carbon content, fossil 0.04, dry mass 1 kg, wet mass 1 kg
- electricity, medium voltage: 0.000197498, 0.000316892, 8.59584e-5, 4.94456e-5, 0.000186965, 5.93248e-5, 0.000144754, 0.000697567, 0.000185557, 0.000787056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 kWh (101 suppliers, which the file names only by identifier); sum of these 0.111 kWh; lognormal variance with pedigree 0.0012, pedigree (1,3,3,1,1)
- fly ash and scrubber sludge: -7.13586e-7, -6.02864e-5 kg (2 suppliers, which the file names only by identifier); sum of these -6.1e-5 kg; lognormal variance with pedigree 0.2106, pedigree (5,5,5,5,5)
  properties: carbon content, fossil 0.167, dry mass 0.1 kg, water content 9, wet mass 1 kg
- heat, district or industrial, natural gas: 1.8316 MJ; lognormal variance with pedigree 0, pedigree (1,1,3,1,1)
  properties: Corresponding fuel use 1.04 MJ, fuel input in physical units, m3 0.04715 m3, heating value, net 1 MJ
- heat, district or industrial, other than natural gas: 0.632479 MJ; lognormal variance with pedigree 0, pedigree (1,1,3,1,1)
  properties: Corresponding fuel use 1.053 MJ, fuel input in physical units, kg 0.01665 kg, heating value, net 1 MJ
- heat, district or industrial, other than natural gas: 0.0052716 MJ; lognormal variance with pedigree 0, pedigree (1,1,3,1,1)
  properties: Corresponding fuel use 1.053 MJ, fuel input in physical units, kg 0.00013 kg, heating value, net 1 MJ
- inert waste, for final disposal: -0.0260305, -0.000169466 kg (2 suppliers, which the file names only by identifier); sum of these -0.0262 kg
  properties: amount of non-specified waste to landfill 0.00425 kg, amount of non-specified waste to recycling 0.01 kg, amount of refractory material sent to landfill 0.005 kg, amount of refractory material sent to recycling 0.008 kg, dry mass 0.995 kg, water content 0.00502513, wet mass 1 kg
- petroleum coke: 0.675 kg; lognormal variance with pedigree 0.0012, pedigree (1,3,3,1,1)
  properties: carbon content, fossil 0.885, dry mass 1 kg, heating value, net 35 MJ, wet mass 1 kg
- pitch: 0.00114242, 0.000215279, 0.000563121, 0.144079 kg (4 suppliers, which the file names only by identifier); sum of these 0.146 kg; lognormal variance with pedigree 0.0012, pedigree (1,3,3,1,1)
  properties: carbon content, fossil 0.83, dry mass 1 kg, heating value, net 28 MJ, wet mass 1 kg
- refractory, fireclay, packed: 0.00715 kg; lognormal variance with pedigree 0.0012, pedigree (1,3,3,1,1)
  properties: dry mass 1 kg, wet mass 1 kg
- scrap steel: -0.00409833, -1.67196e-6 kg (2 suppliers, which the file names only by identifier); sum of these -0.0041 kg; lognormal variance with pedigree 0.0012, pedigree (1,3,1,1,1)
  properties: dry mass 1 kg, wet mass 1 kg
- waste asphalt: -0.000101003, -0.011899 kg (2 suppliers, which the file names only by identifier); sum of these -0.012 kg; lognormal variance with pedigree 0.0012, pedigree (1,3,1,1,1)
  properties: carbon content, fossil 0.0440796, dry mass 0.999 kg, water content 0.001001, wet mass 1 kg

## Inputs from nature
- Water, cooling, unspecified natural origin [natural resource, in water]: 0.00195 m3; lognormal variance with pedigree 0.0018, pedigree (2,3,3,1,1)
- Water, salt, ocean [natural resource, in water]: 0.00157 m3; lognormal variance with pedigree 0.0018, pedigree (2,3,3,1,1)

## Emissions to nature
- Benzo(a)pyrene [air, unspecified]: 5e-8 kg; lognormal variance with pedigree 0.302, pedigree (1,4,3,1,1)
- Hydrogen fluoride [air, unspecified]: 2.4e-5 kg; lognormal variance with pedigree 0.0406, pedigree (1,3,3,1,1)
- Nitrogen oxides [air, unspecified]: 0.000495 kg; lognormal variance with pedigree 0.0406, pedigree (1,3,3,1,1)
- PAH, polycyclic aromatic hydrocarbons [air, unspecified]: 5.3e-5 kg; lognormal variance with pedigree 0.0006, pedigree (1,3,3,1,1)
- Particulate Matter, < 2.5 um [air, unspecified]: 8e-5 kg; lognormal variance with pedigree 0.0012, pedigree (1,3,3,1,1)
- Particulate Matter, > 10 um [air, unspecified]: 0.00024 kg; lognormal variance with pedigree 0.0026, pedigree (1,4,3,1,1)
- Particulate Matter, > 2.5 um and < 10um [air, unspecified]: 0.00024 kg; lognormal variance with pedigree 0.0026, pedigree (1,4,3,1,1)
- Sulfur dioxide [air, unspecified]: 0.0043 kg; lognormal variance with pedigree 0.0012, pedigree (1,3,3,1,1)
- Water [air, unspecified]: 0.00089 m3; lognormal variance with pedigree 0.2106, pedigree (5,5,5,5,5)
- Fluoride [water, unspecified]: 9e-6 kg; lognormal variance with pedigree 0.0026, pedigree (1,4,3,1,1)
- Oils, unspecified [water, unspecified]: 2e-5 kg; lognormal variance with pedigree 0.0026, pedigree (1,4,3,1,1)
- PAH, polycyclic aromatic hydrocarbons [water, unspecified]: 1e-8 kg; lognormal variance with pedigree 0.0026, pedigree (1,4,3,1,1)
- Suspended solids, unspecified [water, unspecified]: 9e-5 kg; lognormal variance with pedigree 0.0026, pedigree (1,4,3,1,1)
- Water [water, ocean]: 0.0016 m3; lognormal variance with pedigree 0.0012, pedigree (1,3,3,1,1)
- Water [water, surface water]: 0.0017 m3; lognormal variance with pedigree 0.0018, pedigree (2,3,3,1,1)

## Sampling procedure
2015 data is included where available from annual IAI surveys (electricity, fuel, petrol coke & pitch inputs). Other flows are based on a life cycle inventory survey carried out by IAI for its member and non member companies. The survey was conducted in 2016 for 2015 data. Total percent representativeness is based on 2015 LCI data, using 2015 production volumes.

## Extrapolations
The infrastructure input was not covered by the IAI survey and uses the rough guess in ecoinvent 2.2.
