# tempering, flat glass

Dataset: EcoSpold 2, unit process
Geography: RoW
Time period: 2000-01-01 to 2022-12-31
Technology level: current
Classification: ISIC rev.4 ecoinvent: 2310:Manufacture of glass and glass products
Classification: EcoSpold01Categories: glass/construction
Synonyms: toughening
Tags: ConvertedDataset
Scenario: Business-as-Usual
System model: Allocation, cut-off by classification
Generated by: Niels Jungbluth
Published in: Kellenberger D. 2007
Database: ecoinvent
isCopyrightProtected: true
accessRestrictedTo: 1

## General comment
Basic assumption of unit process raw data for the tempering of glass. Tempering or toughening is a special process of solidification of a glass sheet in order to make it particularly resistant to breakages. The process may be physical (thermal) or chemical. Here a thermal tempering is assumed. The result is a sheet of glass which is two or three times stronger than untempered glass.
[This dataset was already contained in the ecoinvent database version 2. It was not individually updated during the transfer to ecoinvent version 3. Life Cycle Impact Assessment results may still have changed, as they are affected by changes in the supply chain, i.e. in other datasets. This dataset was generated following the ecoinvent quality guidelines for version 2. It may have been subject to central changes described in the ecoinvent version 3 change report (http://www.ecoinvent.org/database/ecoinvent-version-3/reports-of-changes/), and the results of the central updates were reviewed extensively. The changes added e.g. consistent water flows and other information throughout the database. The documentation of this dataset can be found in the ecoinvent reports of version 2, which are still available via the ecoinvent website. The change report linked above covers all central changes that were made during the conversion process.]

## Included activities end
Gate to gate inventory for the process not including infrastructure and emissions.

## Geography
Assumption for RER.

## Technology
The glass sheet is heated to a temperature just below its softening point (about 640°C) and then immediately cooled by special jets of cold-air. These harden the surface of the glass, giving the inside more time to cool. This allows the external layer to crystallize into a wider lattice while the inside solidifies with greater compression than in the crystal lattice.

## Time period
Date of estimation.

## Reference product
- tempering, flat glass: 1 kg; By-product classification allocatable product; CPC 88531: Glass manufacturing services
  production volume 2.67763 kg
  properties: carbon allocation 0 kg, carbon content 0, price 0.391888 EUR2005

## Inputs from technosphere
- flat glass, uncoated: 0.12 kg; lognormal variance with pedigree 0.0046, pedigree (3,3,5,5,1)
  properties: dry mass 1 kg, wet mass 1 kg
- heat, district or industrial, natural gas: 1.17765, 0.0193518 MJ (2 suppliers, which the file names only by identifier); sum of these 1.197 MJ; lognormal variance with pedigree 0.08, pedigree (5,5,5,5,1)
  properties: heating value, net 1 MJ

## Sampling procedure
Assumption.

## Extrapolations
This dataset has been copied from an original dataset covering the geography RER. The uncertainty has been adjusted accordingly.

## Review by Daniel Kellenberger (obsolete) 2003-06-18
passed
