# cement production, CEM V/B

Dataset: EcoSpold 2, unit process
Geography: RoW
Time period: 2005-01-01 to 2022-12-31
Technology level: current
Classification: ISIC rev.4 ecoinvent: 2394:Manufacture of cement, lime and plaster
Synonyms: Composite cement; CEM V/B
Tags: combined production
Scenario: Business-as-Usual
System model: Allocation, cut-off by classification
Share of production covered: 10 %
Generated by: Michael Elias Boesch
Published in: Boesch, M.E. 2010
Database: ecoinvent
isCopyrightProtected: true
accessRestrictedTo: 1

## General comment
The dataset describes the production of cement (CEM V/B).

## Included activities start
From cradle, i.e. including all upstream activities. As source of gypsum, waste gypsum from flue gas treatment is assumed.

## Included activities end
This activity ends with the cement produced in the cement mill. The dataset does not include packaging and administration.

## Reference product
- cement, CEM V/B: 1 kg; By-product classification allocatable product; CPC 37440: Portland cement, aluminous cement, slag cement and similar hydraulic cements, except in the form of clinkers
  production volume 1.15417e10 kg
  properties: carbon allocation 0 kg, carbon content 0, carbon content, fossil 0, carbon content, non-fossil 0, dry mass 1 kg, price 0.0615 EUR2005, water content 0, water in wet mass 0 kg, wet mass 1 kg

## Inputs from technosphere
- burnt shale: 0.0061 kg; lognormal variance with pedigree 0.216, pedigree (5,5,5,5,5)
  properties: dry mass 1 kg, wet mass 1 kg
- cement factory: 5.36e-11 unit; lognormal variance with pedigree 0.3032, pedigree (2,1,3,4,1)
- clinker: 0.375 kg; lognormal variance with pedigree 0.0053, pedigree (3,3,3,3,1)
  properties: dry mass 1 kg, wet mass 1 kg
- electricity, medium voltage: 0.00271626, 0.00136319, 0.0249219, 0.000412734, 8.08901e-5, 0.00870505 kWh (6 suppliers, which the file names only by identifier); sum of these 0.0382 kWh; lognormal variance with pedigree 0.0053, pedigree (3,3,3,3,1)
- ethylene glycol: 0.00031 kg; lognormal variance with pedigree 0.0053, pedigree (3,3,3,3,1)
  properties: carbon content, fossil 0.387097, dry mass 1 kg, heating value, net 23.44 MJ, wet mass 1 kg
- ground granulated blast furnace slag: 0.004148, 0.0196691, 0.0813333, 0.19985 kg (4 suppliers, which the file names only by identifier); sum of these 0.305 kg; lognormal variance with pedigree 0.0053, pedigree (3,3,3,3,1)
  properties: dry mass 1 kg, wet mass 1 kg
- gypsum, mineral: 0.000396969, 0.0190139, 8.9158e-5 kg (3 suppliers, which the file names only by identifier); sum of these 0.0195 kg; lognormal variance with pedigree 0.0053, pedigree (3,3,3,3,1)
  properties: dry mass 1 kg, wet mass 1 kg
- heat, district or industrial, other than natural gas: 0.0975548, 4.51953e-5 MJ (2 suppliers, which the file names only by identifier); sum of these 0.0976 MJ; lognormal variance with pedigree 0.0006, pedigree (1,1,1,1,1)
  properties: heating value, net 1 MJ
- limestone, crushed, for mill: 0.258265, 0.00103548 kg (2 suppliers, which the file names only by identifier); sum of these 0.2593 kg; lognormal variance with pedigree 0.0053, pedigree (3,3,3,3,1)
  properties: carbon content, fossil 0.117492, dry mass 0.998 kg, water content 0.00200401, wet mass 1 kg
- steel, low-alloyed: 0.00011 kg; lognormal variance with pedigree 0.0053, pedigree (3,3,3,3,1)
  properties: carbon content, fossil 0.005, dry mass 1 kg, wet mass 1 kg

## Emissions to nature
- Heat, waste [air, unspecified]: 0.138 MJ; lognormal variance with pedigree 0.0447, pedigree (3,3,3,3,1)

## Sampling procedure
Data approximates average European production
