# electricity, high voltage, import from BR-North-eastern grid

Dataset: EcoSpold 2, unit process
Geography: BR-Northern grid
Time period: 2022-01-01 to 2022-12-31
Technology level: current
Classification: ISIC rev.4 ecoinvent: 3510:Electric power generation, transmission and distribution
Scenario: Business-as-Usual
System model: Allocation, cut-off by classification
Generated by: Johannes Müller
Published in: Suppen, N 2017
Database: ecoinvent
isCopyrightProtected: true
accessRestrictedTo: 1

## General comment
This dataset represents the amount of imported electricity from the Brazilian Southern electricity grid to the Brazilian South-eastern/Mid-western electricity grid. T

## Included activities start
This activity represents the point of 'handing over' the electricity from one electricity grid to the other at the border.

## Included activities end
This dataset doesn't include any electricity losses or transmission infrastructure as these are accounted for in the market datasets.

## Time period
The production volume is valid for the year 2014

## Reference product
- electricity, high voltage: 1 kWh; By-product classification allocatable product; CPC 17100: Electrical energy
  production volume 2.55671e9 kWh
  properties: carbon allocation 0 kg, carbon content 0, price 0.0977 EUR2005

## Inputs from technosphere
- electricity, high voltage: 1 kWh

## Sampling procedure
Literature data: The total amount of electricity imported to the BR South-eastern grid in 2014 was found in literature. The split of this amount between the supplying grids was done based on the share of the installed transmission capacities between the grids.
