# pentaerythritol production in sodium hydroxide solution

Dataset: EcoSpold 2, unit process
Geography: RoW
Time period: 1997-01-01 to 2022-12-31
Technology level: current
Classification: ISIC rev.4 ecoinvent: 2011:Manufacture of basic chemicals
Synonyms: Pentek; Pentaerythrite; 115-77-5; Auxinutril; 2,2-bis(hydroxymethyl)propane-1,3-diol
Scenario: Business-as-Usual
System model: Allocation, cut-off by classification
Generated by: Mike Chudacoff
Published in: Althaus H.-J. 2007
Database: ecoinvent
isCopyrightProtected: true
accessRestrictedTo: 1

## General comment
This dataset represents a multi-output process which delivers the co-products pentaerythritol and sodium formate from the reaction of formaldehyde with acetaldehyde. Sodium formate can be used as a fuel or sold. Pentaerythritol is an organic chemical compound in the form of white crystals. It is used primarily for the production of alkyd resins, as well as lubricants and antioxidants. Pentaerythritol is produced industrially by reacting formaldehyde with acetaldehyde at 15 – 45 °C in the presence of aqueous calcium hydroxide or sodium hydroxide. This dataset is based on industry data as well as estimations based on data from a large chemical plant (Gendorf 2016).
References:
Althaus H.-J., Chudacoff M., Hischier R., Jungbluth N., Osses M. and Primas A. (2007) Life Cycle Inventories of Chemicals. ecoinvent report No. 8, v2.0. EMPA Dübendorf, Swiss Centre for Life Cycle Inventories, Dübendorf, CH.
Gendorf (2016) Umwelterklärung 2015, Werk Gendorf Industriepark, www.gendorf.de.

## Included activities start
The activity starts when the raw materials enter the process.

## Included activities end
This activity ends with the production of pentaerythritol. The dataset includes all precursors, ancillary materials, energy and estimated infrastructure.

## Geography
The data is based on confidential information concerning European production processes but is assumed to be representative of the global production. Some values are based on data from a large chemical factory located in Germany. These are assumed to be valid for this geography.

## Technology
Penta is produced industrially by reacting formaldehyde with acetaldehyde at 15 – 45 °C in the presence of aqueous calcium hydroxide or sodium hydroxide, according to the following reaction:
3 HCHO + H3C-CHO -> C5H12O4
Generally, a fourfold surplus of formaldehyde is used in order to minimize the production of dipentaerythritol.
There are no competing routes for the production of penta. Production information is confidential.
Reference:
Althaus H.-J., Chudacoff M., Hischier R., Jungbluth N., Osses M. and Primas A. (2007) Life Cycle Inventories of Chemicals. Final report ecoinvent data v2.0 No. 8. Swiss Centre for Life Cycle Inventories, Dübendorf, CH.

## Time period
The time period represents the approximate period during which the data was collected. Some values are based on data published by the Gendorf factory that were collected between 2011 and 2015. The time period has been adjusted accordingly. For more details, see the comments of the exchanges.

## Reference product
- sodium formate: 1 kg; By-product classification allocatable product; CPC 34140: Carboxylic acids and their anhydrides, halides, peroxides and peroxyacids and their halogenated, sulphonated, […]
  production volume 8.77195e7 kg
  properties: allocation factor 0.238764, carbon allocation 0.176471 kg, carbon content 0.176471, carbon content, fossil 0.176471, carbon content, non-fossil 0, dry mass 1 kg, heating value, net 7.13 MJ, price 0.466 EUR2005, true value 0.29358, water content 0, water in wet mass 0 kg, wet mass 1 kg

## Inputs from technosphere
- acetaldehyde: 0.136437 kg; lognormal variance with pedigree 0.002, pedigree (1,1,2,5,1)
  properties: carbon content, fossil 0.545296, dry mass 1 kg, heating value, net 27.53 MJ, wet mass 1 kg
- chemical factory, organics: 1.51596e-10 unit; lognormal variance with pedigree 0.3098, pedigree (2,3,2,4,3)
- electricity, medium voltage: 0.0112106, 0.00562621, 0.102858, 0.00170345, 0.000333852, 0.0359278 kWh (6 suppliers, which the file names only by identifier); sum of these 0.15766 kWh; lognormal variance with pedigree 0.0104, pedigree (2,3,2,4,3)
- formaldehyde: 0.394151 kg; lognormal variance with pedigree 0.002, pedigree (1,1,2,5,1)
  properties: carbon content, fossil 0.4, dry mass 1 kg, heating value, net 20.19 MJ, wet mass 1 kg
- heat, district or industrial, natural gas: 1.49146, 0.0245085 MJ (2 suppliers, which the file names only by identifier); sum of these 1.51596 MJ; lognormal variance with pedigree 0.0026, pedigree (2,1,2,5,1)
  properties: heating value, net 1 MJ
- heat, district or industrial, other than natural gas: 0.757631, 0.000350997 MJ (2 suppliers, which the file names only by identifier); sum of these 0.757982 MJ; lognormal variance with pedigree 0.0026, pedigree (2,1,2,5,1)
  properties: heating value, net 1 MJ
- nitrogen, liquid: 0.00720083 kg; lognormal variance with pedigree 0.0104, pedigree (2,3,2,4,3)
  properties: dry mass 1 kg, wet mass 1 kg
- sodium hydroxide, without water, in 50% solution state: 0.142122 kg; lognormal variance with pedigree 0.002, pedigree (1,1,2,5,1)
  properties: dry mass 1 kg, heating value, net 3.03 MJ, wet mass 1 kg
- tap water: 0.000769434, 5.6937e-5, 0.00880502, 0.000153384, 1.84633e-5, 3.05137e-5, 2.00166e-5 kg (7 suppliers, which the file names only by identifier); sum of these 0.00985377 kg; lognormal variance with pedigree 0.0104, pedigree (2,3,2,4,3)
  properties: carbon content, fossil 0.00178991, dry mass 0.000337476 kg, water content 2962.17, wet mass 1 kg
- wastewater, average: -1.01965e-6, -3.63033e-9 m3 (2 suppliers, which the file names only by identifier); sum of these -1.02328e-6 m3; lognormal variance with pedigree 0.0104, pedigree (2,3,1,4,3)
  properties: carbon content, non-fossil 0.194039, dry mass 0.346837 kg, water content 2882.2, wet mass 1000 kg
- water, deionised: 0.142122 kg; lognormal variance with pedigree 0.002, pedigree (1,1,2,5,1)
  properties: wet mass 1 kg

## Inputs from nature
- Peat [natural resource, biotic]: 0.00659445 kg; lognormal variance with pedigree 0.014, pedigree (3,1,2,5,1)
- Water, cooling, unspecified natural origin [natural resource, in water]: 0.00621546 m3; lognormal variance with pedigree 0.0104, pedigree (2,3,2,4,3)
- Water, river [natural resource, in water]: 0.000325932 m3; lognormal variance with pedigree 0.0104, pedigree (2,3,2,4,3)
- Water, well, in ground [natural resource, in water]: 0.000314563 m3; lognormal variance with pedigree 0.0104, pedigree (2,3,2,4,3)

## Emissions to nature
- Ammonia [air, urban air close to ground]: 1.24309e-5 kg; lognormal variance with pedigree 0.002, pedigree (1,1,2,5,1)
- Carbon dioxide, fossil [air, urban air close to ground]: 0.0492689 kg; lognormal variance with pedigree 0.014, pedigree (3,1,2,5,1)
- Carbon monoxide, fossil [air, urban air close to ground]: 0.000390361 kg; lognormal variance with pedigree 0.002, pedigree (1,1,2,5,1)
- Nitrogen [air, unspecified]: 0.00720083 kg; lognormal variance with pedigree 0.0104, pedigree (2,3,2,4,3)
- Nitrogen oxides [air, urban air close to ground]: 0.000249755 kg; lognormal variance with pedigree 0.002, pedigree (1,1,2,5,1)
- Particulate Matter, > 2.5 um and < 10um [air, urban air close to ground]: 1.4667e-5 kg; lognormal variance with pedigree 0.002, pedigree (1,1,2,5,1)
- Sulfur dioxide [air, urban air close to ground]: 0.000121656 kg; lognormal variance with pedigree 0.002, pedigree (1,1,2,5,1)
- Water [air, unspecified]: 0.000530588 m3; lognormal variance with pedigree 0.0104, pedigree (2,3,2,4,3)
- BOD5, Biological Oxygen Demand [water, surface water]: 0.000176004 kg; lognormal variance with pedigree 0.014, pedigree (3,1,2,5,1)
- COD, Chemical Oxygen Demand [water, surface water]: 0.000352007 kg; lognormal variance with pedigree 0.014, pedigree (3,1,2,5,1)
- DOC, Dissolved Organic Carbon [water, surface water]: 0.000130373 kg; lognormal variance with pedigree 0.014, pedigree (3,1,2,5,1)
- TOC, Total Organic Carbon [water, surface water]: 0.000130373 kg; lognormal variance with pedigree 0.014, pedigree (3,1,2,5,1)
- Water [water, unspecified]: 0.00632915 m3; lognormal variance with pedigree 0.0104, pedigree (2,3,2,4,3)

## Sampling procedure
Literature and survey data. Some values are calculated based on data from a large chemical factory located in Germany. For more details, see the comments of the exchanges.

## Extrapolations
This dataset has been copied from an original dataset covering the geography RER. The uncertainty has been adjusted accordingly.

## Review by Gregor Wernet 2017-08-04
This dataset was additionally reviewed in a separate review process by Eric Johnson of Atlantic Consulting as well as Emilia Moreno Ruiz and Gregor Wernet of ecoinvent.
