# fattening of heifers for beef production, feedlot

Dataset: EcoSpold 2, unit process
Geography: RoW
Time period: 2016-01-01 to 2022-12-31
Technology level: current
Classification: ISIC rev.4 ecoinvent: 0141:Raising of cattle and buffaloes
Scenario: Business-as-Usual
System model: Allocation, cut-off by classification
Generated by: [System]
Published in: Russo, V, 2017
Database: ecoinvent
isCopyrightProtected: true
accessRestrictedTo: 1

## General comment
This dataset represents the production of 1 kg of live weight of beef cattle from heifers (yearlings) in a large commercial feedlot. In order to be consistent with the structure of the ecoinvent database this global dataset was created as an exact copy of the local South African dataset. The production volume of the global dataset is derived from the global import of cattle heads (FAOSTAT, 2013), with cattle heads allocated in the same proportion as the South African product mix.
The dataset is adapted from that of fattening of weaned calves in a feedlot, but with time spent at the feedlot adjusted to account for the higher entry weight. The dataset assumes an average entry weight of 365 kg and average slaughter weight of 485 kg. Applying the same average daily weight gain as the feedlot for fattening of weaners (1.9 kg per day) results in a time in the feedlot for yearlings of just under three and a half months. The same proportional breakdown into adaptation and finishing stages is retained, i.e. for the first third of the time at the feedlot the cattle spend four hours per day on pasture. After that cattle are kept wholly in pens. All other inclusions, exclusions and assumptions are as for "fattening of calves for beef production, feedlot".

## Included activities start
This activity starts with heifers (yearlings) entering the feedlot.

## Included activities end
This activity ends with the provision of fattened cattle at the farm gate, ready to be sent to slaughterhouses as live weight. Emissions from cattle and manure are included, as are their requirements (feed and water). Electricity and diesel use (represented as tractor use in the dataset) are also included. Pasture is predominantly natural with some irrigation.

## Geography
South African values: Not applicable worldwide.

## Technology
Data and assumptions reflect current farming practices in South Africa

## Time period
Period indicated in the reference.

## Parameters
- fraction, process water, to air: 0.15 dimensionless; name fraction_PW_to_air; lognormal variance with pedigree 0.094, pedigree (4,4,3,5,4)
  Literature value. In case when no industry/process specific data are available, default evaporation fraction value is used. This value is 15% and is based on literature (Statistics Canada, 2007 & Shaffer, K.H., 2008, Consumptive water use in the Great Lakes Basin, USGS & Shiklomanov, 2003, World Water Resources at the Beginning of the 21st Century) and has been approved by an expert.

## Reference product
- cattle for slaughtering, live weight: 1 kg; By-product classification allocatable product; CPC 02111: Cattle
  production volume 8.13e7 kg
  properties: carbon allocation 0.29568 kg, carbon content 0.4928, carbon content, fossil 0, carbon content, non-fossil 0.4928, dry mass 0.6 kg, energy content 14.9367 MJ, price 2.025 EUR2005, water content 0.666667, water in wet mass 0.4 kg, wet mass 1 kg

## Inputs from technosphere
- alfalfa-grass silage: 0.0311 kg; lognormal variance with pedigree 0.0034, pedigree (2,4,5,5,1)
  properties: carbon content, non-fossil 0.484, dry mass 1 kg, energy content 18.55 MJ, water content 1.1739, wet mass 2.1739 kg
- electricity, low voltage: 7.61666e-8, 1.37121e-6, 9.61274e-6, 1.95312e-7, 2.04259e-6, 1.09694e-6, 1.96398e-6, 1.99081e-6, 2.32565e-5, 2.01413e-6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 kWh (36 suppliers, which the file names only by identifier); sum of these 0.00345 kWh; lognormal variance with pedigree 0.002, pedigree (2,3,5,5,1)
- energy feed, gross: 1.68 MJ; lognormal variance with pedigree 0.0434, pedigree (2,4,5,5,4)
  properties: dry mass 1 kg, wet mass 1 kg
- irrigation: 1.11501e-5, 9.87964e-5, 0.00169718, 0.00318592, 0.000165439, 2.98955e-5, 1.67744e-7, 6.68876e-6, 3.26238e-5, 6.52229e-6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 m3 (16 suppliers, which the file names only by identifier); sum of these 0.00657 m3; lognormal variance with pedigree 0.0034, pedigree (2,4,5,5,1)
  properties: dry mass 0.11 kg, water content 9089.91, wet mass 1000 kg
- lime: 0.0211715, 0.00182855 kg (2 suppliers, which the file names only by identifier); sum of these 0.023 kg; lognormal variance with pedigree 0.0034, pedigree (2,4,5,5,1)
  properties: carbon content, fossil 0.120005, dry mass 1 kg, wet mass 1 kg
- maize chop: 0.551 kg; lognormal variance with pedigree 0.0034, pedigree (2,4,5,5,1)
  properties: carbon content, non-fossil 0.46957, dry mass 0.893 kg, water content 0.119821, wet mass 1 kg
- maize grain: 0.0302228, 0.479777 kg (2 suppliers, which the file names only by identifier); sum of these 0.51 kg; lognormal variance with pedigree 0.0034, pedigree (2,4,5,5,1)
  properties: carbon content, non-fossil 0.46957, dry mass 0.86 kg, water content 0.162791, wet mass 1 kg
- maize silage: 0.0270536, 0.583946 kg (2 suppliers, which the file names only by identifier); sum of these 0.611 kg; lognormal variance with pedigree 0.0034, pedigree (2,4,5,5,1)
  properties: carbon content, non-fossil 0.4773, dry mass 0.35 kg, energy content 6.6325 MJ, water content 1.85714, wet mass 1 kg
- manure, liquid, cattle: -0.349 kg; lognormal variance with pedigree 0.0068, pedigree (2,4,2,5,1)
  properties: carbon content, non-fossil 0.68, dry mass 0.075 kg, price 0.0042 EUR2005, water content 12.333, wet mass 1 kg
- manure, solid, cattle: -3.493 kg; lognormal variance with pedigree 0.0068, pedigree (2,4,2,5,1)
  properties: carbon content, non-fossil 0.441, dry mass 0.1715 kg, nitrogen content 0.0277, price 0.0042 EUR2005, water content 4.8309, wet mass 1 kg
- rape meal: 0.122 kg; lognormal variance with pedigree 0.0034, pedigree (2,4,5,5,1)
  properties: carbon content, non-fossil 0.457233, dry mass 0.9 kg, water content 0.111111, wet mass 1 kg
- sodium chloride, powder: 0.0107 kg; lognormal variance with pedigree 0.0034, pedigree (2,4,5,5,1)
  properties: dry mass 1 kg, wet mass 1 kg
- tap water: 0.0123134, 0.140908, 0.10522, 0.00245463, 0.000295471, 0.000488315, 0.000320329 kg (7 suppliers, which the file names only by identifier); sum of these 0.262 kg; lognormal variance with pedigree 0.0034, pedigree (2,4,5,5,1)
  properties: carbon content, fossil 0.00178991, dry mass 0.000337476 kg, water content 2962.17, wet mass 1 kg
- transport, tractor and trailer, agricultural: 0.00584623, 2.37735e-5 metric ton*km (2 suppliers, which the file names only by identifier); sum of these 0.00587 metric ton*km; lognormal variance with pedigree 0.1228, pedigree (2,4,5,5,1)
- urea: 0.0021703, 0.0138427, 0.00175071, 0.0118207 kg (4 suppliers, which the file names only by identifier); sum of these 0.0295844 kg; lognormal variance with pedigree 0.0034, pedigree (2,4,5,5,1)
  properties: carbon content, fossil 0.2, dry mass 1 kg, wet mass 1 kg
- weaned heifers, live weight: 0.740283, 0.128717 kg (2 suppliers, which the file names only by identifier); sum of these 0.869 kg; lognormal variance with pedigree 0.0034, pedigree (2,4,5,5,1)
  properties: carbon content, non-fossil 0.4928, dry mass 0.6 kg, water content 0.666667, wet mass 1 kg
- wheat bran: 0.1714 kg; lognormal variance with pedigree 0.0034, pedigree (2,4,5,5,1)
  properties: carbon content, non-fossil 0.475, dry mass 0.87 kg, water content 0.149425, wet mass 1 kg

## Inputs from nature
- Occupation, grassland, natural, for livestock grazing [natural resource, land]: 0.1668 m2*year; lognormal variance with pedigree 0.0048, pedigree (2,4,5,5,1)
- Occupation, pasture, man made [natural resource, land]: 0.0406 m2*year; lognormal variance with pedigree 0.0048, pedigree (2,4,5,5,1)
- Occupation, unspecified [natural resource, land]: 0.004 m2*year; lognormal variance with pedigree 0.0048, pedigree (2,4,5,5,1)
- Transformation, from grassland, natural, for livestock grazing [natural resource, land]: 0.7451 m2; lognormal variance with pedigree 0.0108, pedigree (2,4,5,5,1)
- Transformation, to grassland, natural, for livestock grazing [natural resource, land]: 0.5881 m2; lognormal variance with pedigree 0.0108, pedigree (2,4,5,5,1)
- Transformation, to pasture, man made [natural resource, land]: 0.143 m2; lognormal variance with pedigree 0.0108, pedigree (2,4,5,5,1)
- Transformation, to unspecified [natural resource, land]: 0.014 m2; lognormal variance with pedigree 0.0108, pedigree (2,4,5,5,1)
- Water, unspecified natural origin [natural resource, in ground]: 0.00369 m3; lognormal variance with pedigree 0.0034, pedigree (2,4,5,5,1)

## Emissions to nature
- Ammonia [air, non-urban air or from high stacks]: 0.0187 kg; lognormal variance with pedigree 0.0108, pedigree (2,4,5,5,1)
- Dinitrogen monoxide [air, non-urban air or from high stacks]: 0.00164 kg; lognormal variance with pedigree 0.0058, pedigree (2,4,5,5,1)
- Methane, non-fossil [air, non-urban air or from high stacks]: 0.0404 kg; lognormal variance with pedigree 0.0108, pedigree (2,4,5,5,1)
- Water [air, unspecified]: 0.0037293 m3
- Cadmium II [soil, agricultural]: 6.48e-9 kg; lognormal variance with pedigree 0.0428, pedigree (2,4,5,5,1)
- Copper ion [soil, agricultural]: 4.65e-7 kg; lognormal variance with pedigree 0.0428, pedigree (2,4,5,5,1)
- Lead II [soil, agricultural]: 1.46e-7 kg; lognormal variance with pedigree 0.0428, pedigree (2,4,5,5,1)
- Mercury II [soil, agricultural]: 1.09e-8 kg; lognormal variance with pedigree 0.0428, pedigree (2,4,5,5,1)
- Nickel II [soil, agricultural]: 1.53e-7 kg; lognormal variance with pedigree 0.0428, pedigree (2,4,5,5,1)
- Zinc II [soil, agricultural]: 3.61e-6 kg; lognormal variance with pedigree 0.0428, pedigree (2,4,5,5,1)
- Cadmium II [water, surface water]: 4.52e-10 kg; lognormal variance with pedigree 0.0928, pedigree (2,4,5,5,1)
- Chromium III [water, surface water]: 5.73e-7 kg; lognormal variance with pedigree 0.0928, pedigree (2,4,5,5,1)
- Copper ion [water, surface water]: 2.23e-7 kg; lognormal variance with pedigree 0.0928, pedigree (2,4,5,5,1)
- Lead II [water, surface water]: 4.39e-9 kg; lognormal variance with pedigree 0.0928, pedigree (2,4,5,5,1)
- Mercury II [water, surface water]: 7.75e-11 kg; lognormal variance with pedigree 0.0928, pedigree (2,4,5,5,1)
- Phosphate [water, surface water]: 0.00331 kg; lognormal variance with pedigree 0.0428, pedigree (2,4,5,5,1)
- Phosphorus [water, surface water]: 0.00223 kg; lognormal variance with pedigree 0.0428, pedigree (2,4,5,5,1)
- Water [water, surface water]: 0.0002227 m3
- Zinc II [water, surface water]: 1.01e-6 kg; lognormal variance with pedigree 0.0928, pedigree (2,4,5,5,1)

## Sampling procedure
See extrapolation comment below. Data from a large representative feedlot in South Africa provides most of the activity data for the dataset. However, where more representative data are available (such as emission factors for methane and nitrous oxide developed for South Africa's national greenhouse gas inventory) these are applied instead. Emissions of phosphates and heavy metals from manure are estimated according to Nemecek and Schnetzer (2011).

## Extrapolations
The dataset is extrapolated from that of fattening of weaned calves in a feedlot, but with time spent at the feedlot adjusted to account for the higher entry weight.
