# ammonium nitrate phosphate production

Dataset: EcoSpold 2, unit process
Geography: RoW
Time period: 1997-01-01 to 2022-12-31
Technology level: current
Classification: ISIC rev.4 ecoinvent: 2012:Manufacture of fertilizers and nitrogen compounds
Synonyms: ANP, Nitro aP
Scenario: Business-as-Usual
System model: Allocation, cut-off by classification
Generated by: Anna Kounina
Database: ecoinvent
isCopyrightProtected: true
accessRestrictedTo: 1

## General comment
This dataset is a weighted average from the respective regional datasets.
This dataset represents the production of 1 kg of ammonium nitrate phosphate (ANP) with 22% N and 22% P2O5 from ammonia and rock phosphate. ANP is a compound fertiliser used to enrich the soil in nitrogen (N) and phosphorous (P), two of the main macronutrients needed to support plant growth.
The production of ammonium nitrate phosphate involves the combination of liquid ammonia with nitric acid and rock phosphate, using heat and electricity. Production and waste treatment of catalysts, coating and packaging of the final fertiliser product are excluded. Infrastructure is included by means of a proxy module.
The main data sources for this dataset are Patyk and Reinhardt (1997) and Althaus et al (2007).
References:
Patyk A. and Reinhardt G. (1997) Düngemittel - Energie- und Strombilanzen. Vieweg Verlag. Braunschweig/Wiesbaden.
Althaus H.-J., Chudacoff M., Hischier R., Jungbluth N., Osses M. and Primas A. (2007) Life Cycle Inventories of Chemicals. ecoinvent report No. 8, v2.0. EMPA Dübendorf, Swiss Centre for Life Cycle Inventories, Dübendorf, CH.

## Included activities start
The activity includes all the raw and processed materials necessary to produce this product. Liquid ammonia, nitric acid, rock phosphate, heat (as natural gas) and electricity are included. Direct emissions include ammonia, nitrogen oxides and particulate matter to air and heavy metals to water.

## Included activities end
The activity ends with the final product being ready for transportation at the production site.

## Geography
This dataset is a weighted average built from the following geographies: RER, RNA, CN.

## Technology
Average techlogy from the regional counterparts as given in the geography comment.

## Time period
Primary data were collected on fertiliser production for the year 2013-2014. These data were based on annual average data based on different production plants.

## Reference product
- ammonium nitrate phosphate: 1 kg; By-product classification allocatable product; CPC 34644: Fertilizers containing two nutrients: nitrogen and phosphorus
  production volume 4.57645e8 kg
  properties: carbon allocation 0 kg, carbon content 0, carbon content, fossil 0, carbon content, non-fossil 0, dry mass 1 kg, nitrogen content 0.22, phosphorus content 0.0960126, price 0.457143 EUR2005, water content 0, water in wet mass 0 kg, wet mass 1 kg

## Inputs from technosphere
- ammonia, anhydrous, liquid: 0.00128064, 0.00404588, 0.0122186, 0.00572495, 0.135436, 0.00629435 kg (6 suppliers, which the file names only by identifier); sum of these 0.165 kg; lognormal variance with pedigree 0.0086, pedigree (3,4,5,5,1)
  properties: dry mass 1 kg, hydrogen content 0.177547, nitrogen content 0.822453, wet mass 1 kg
- chemical factory, organics: 4e-10 unit; lognormal variance with pedigree 0.308, pedigree (3,4,5,5,1)
- electricity, low voltage: 0.000642113, 0.000403205, 0.000130849, 0.000182017, 0.000587239, 0.0197427, 0.00939068, 9.53975e-5, 0.000515903, 0.00349825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 kWh (43 suppliers, which the file names only by identifier); sum of these 0.281 kWh; lognormal variance with pedigree 0.0086, pedigree (3,4,5,5,1)
- heat, district or industrial, natural gas: 2.36 MJ; lognormal variance with pedigree 0.0086, pedigree (3,4,5,5,1)
  properties: heating value, net 1 MJ
- nitric acid, without water, in 50% solution state: 0.0528516, 0.0298519, 0.0441912, 0.110304, 0.0443553, 0.143446 kg (6 suppliers, which the file names only by identifier); sum of these 0.425 kg; lognormal variance with pedigree 0.0086, pedigree (3,4,5,5,1)
  properties: dry mass 1 kg, hydrogen content 0.0159952, nitrogen content 0.222283, oxygen content 0.761721, wet mass 1 kg
- non-sulfidic overburden, off-site: -1.26188 kg; lognormal variance with pedigree 0.0086, pedigree (3,4,3,5,1)
  properties: dry mass 1 kg, wet mass 1 kg
- phosphate rock, beneficiated: 0.0219047, 1.64997 kg (2 suppliers, which the file names only by identifier); sum of these 1.67188 kg; lognormal variance with pedigree 0.0086, pedigree (3,4,5,5,1)
  properties: dry mass 1 kg, wet mass 1 kg

## Emissions to nature
- Ammonia [air, urban air close to ground]: 0.000105 kg; lognormal variance with pedigree 0.048, pedigree (3,4,5,5,1)
- Nitrogen oxides [air, urban air close to ground]: 0.00287 kg; lognormal variance with pedigree 0.048, pedigree (3,4,5,5,1)
- Particulate Matter, < 2.5 um [air, urban air close to ground]: 0.000206 kg; lognormal variance with pedigree 0.128, pedigree (3,4,5,5,1)
- Particulate Matter, > 10 um [air, urban air close to ground]: 0.000206 kg; lognormal variance with pedigree 0.048, pedigree (3,4,5,5,1)
- Particulate Matter, > 2.5 um and < 10um [air, urban air close to ground]: 0.00071429 kg; lognormal variance with pedigree 0.128, pedigree (3,4,5,5,1)
- Arsenic ion [water, surface water]: 2.36e-6 kg; lognormal variance with pedigree 0.658, pedigree (3,4,5,5,1)
- Cadmium II [water, surface water]: 2.36e-6 kg; lognormal variance with pedigree 0.658, pedigree (3,4,5,5,1)
- Chromium III [water, surface water]: 1.17e-5 kg; lognormal variance with pedigree 0.658, pedigree (3,4,5,5,1)
- Copper ion [water, surface water]: 1.17e-5 kg; lognormal variance with pedigree 0.658, pedigree (3,4,5,5,1)
- Lead II [water, surface water]: 1.02e-5 kg; lognormal variance with pedigree 0.658, pedigree (3,4,5,5,1)
- Mercury II [water, surface water]: 1.77e-5 kg; lognormal variance with pedigree 0.658, pedigree (3,4,5,5,1)
- Nickel II [water, surface water]: 9.1e-6 kg; lognormal variance with pedigree 0.658, pedigree (3,4,5,5,1)
- Phosphate [water, surface water]: 0.000523 kg; lognormal variance with pedigree 0.048, pedigree (3,4,5,5,1)
- Zinc II [water, surface water]: 1.39e-5 kg; lognormal variance with pedigree 0.658, pedigree (3,4,5,5,1)

## Extrapolations
This dataset was built as a weighted average of regional datasets of the same activityName. Weights are based on production volumes.
RER: production volume = 3.76e+08 kg/year, weight = 0.4282
RNA: production volume = 3.26e+08 kg/year, weight = 0.3713
CN: production volume = 1.76e+08 kg/year, weight = 0.2004
