# anhydrite production

Dataset: EcoSpold 2, unit process
Geography: RoW
Time period: 1997-01-01 to 2022-12-31
Technology level: current
Classification: ISIC rev.4 ecoinvent: 2394:Manufacture of cement, lime and plaster
Classification: EcoSpold01Categories: construction materials/binder
Synonyms: calcium sulphate; Kalziumsulfat
Tags: ConvertedDataset
Scenario: Business-as-Usual
System model: Allocation, cut-off by classification
Generated by: Hans-Jörg Althaus
Published in: Kellenberger D. 2007
Database: ecoinvent
isCopyrightProtected: true
accessRestrictedTo: 1

## General comment
used in cement industry and cast plaster floor
[This dataset was already contained in the ecoinvent database version 2. It was not individually updated during the transfer to ecoinvent version 3. Life Cycle Impact Assessment results may still have changed, as they are affected by changes in the supply chain, i.e. in other datasets. This dataset was generated following the ecoinvent quality guidelines for version 2. It may have been subject to central changes described in the ecoinvent version 3 change report (http://www.ecoinvent.org/database/ecoinvent-version-3/reports-of-changes/), and the results of the central updates were reviewed extensively. The changes added e.g. consistent water flows and other information throughout the database. The documentation of this dataset can be found in the ecoinvent reports of version 2, which are still available via the ecoinvent website. The change report linked above covers all central changes that were made during the conversion process.]

## Included activities end
mix of burned and natural anhydrite; milling of natural anhydrite

## Geography
data for Switzerland

## Technology
Mix of products

## Reference product
- anhydrite: 1 kg; By-product classification allocatable product; CPC 15200: Gypsum; anhydrite; limestone flux; limestone and other calcareous stone, of a kind used for the manufacture of[…]
  production volume 3.96633 kg
  properties: carbon allocation 0 kg, carbon content 0, carbon content, fossil 0, carbon content, non-fossil 0, dry mass 0.984 kg, price 0.0259902 EUR2005, water content 0.0162602, water in wet mass 0.016 kg, wet mass 1 kg

## Inputs from technosphere
- anhydrite rock: 0.9 kg; lognormal variance with pedigree 0.022, pedigree (4,4,5,5,1)
  properties: dry mass 1 kg, wet mass 1 kg
- anhydrite, burned: 0.1 kg; lognormal variance with pedigree 0.022, pedigree (4,4,5,5,1)
  properties: dry mass 1 kg, wet mass 1 kg
- electricity, medium voltage: 0.000976389, 0.00143559, 0.000720468, 0.0131716, 0.000218137, 4.27517e-5, 0.00313429, 0.00460076 kWh (8 suppliers, which the file names only by identifier); sum of these 0.0243 kWh; lognormal variance with pedigree 0.024, pedigree (3,4,5,5,3)
- industrial machine, heavy, unspecified: 0.00011 kg; lognormal variance with pedigree 0.334, pedigree (3,4,5,5,3)

## Sampling procedure
environmental report, personal communication

## Extrapolations
none This dataset has been copied from an original dataset covering the geography CH. The uncertainty has been adjusted accordingly.

## Review by Roberto Dones 2003-07-04
Passed
