# strawberry production, in heated greenhouse

Dataset: EcoSpold 2, unit process
Geography: RoW
Time period: 2009-01-01 to 2022-12-31
Technology level: current
Classification: ISIC rev.4 ecoinvent: 0125:Growing of other tree and bush fruits and nuts
Tags: WFLDB
Scenario: Business-as-Usual
System model: Allocation, cut-off by classification
Generated by: [System]
Database: ecoinvent
isCopyrightProtected: true
accessRestrictedTo: 1

## General comment
This global dataset is a copy of the regional CH dataset, except for the following modifications.
The production volume represents the global annual production.
The geographicalCorrelation score of every pedigree matrix of was changed to '5'.
Yield of the global dataset = 100000 kg/ha, calculated as a weighted average of the regional yields.
The comments below were part of the CH regional dataset.
This dataset represents the production of 1 kg of strawberry . The reference flow is the average yield per ha.yr and year, from 2009 - 2012: yield (100t/ha.y) obtained under irrigated conditions (total amount of water 822 m3/ha.y). The data are representative for strawberry production in Switzerland under heated greenhouse conditions. Typically, greenhouses are heated from March to May as to enable a first early harvest. Greenhouses are then non-heated from May to October which results in two additional harvests. Mineral NPK fertiliser input is 480-180-640 kg/ha. No organic fertilisers are applied. Total active ingredients (a.i.) applied as pesticides amount to 45.8 kg a.i./ha.
The dataset was modelled within the project 'World Food LCA database (WFLDB)'. The aim of this project was to provide inventories of a broad variety of agricultural products and processes and to cover for each product at least 50% of the global export market.
PEF-Quality: data quality rating (DQR) = 2.0 (i.e. very good quality). This dataset refers to an average situation; for specific situations exchanges might differ substantially due to site specific parameters

## Included activities start
This activity starts with soil cultivation after the harvest of the previous crop.

## Included activities end
This activity ends with harvest and transport to the farm gate. Storage is not included.
The dataset includes all activities during a cycle, i.e. all machine operations, corresponding infrastructure, fuel use and sheds. Machine operations include: soil cultivation, fertilisation, pesticide application, harvesting, and on-farm transport. Further, direct field emissions and land use change are included. Irrigation is included, as well as greenhouses infrastructures and energy consumption when relevant. The inputs of seedlings, fertilisers and pesticides as well as packaging of fertilisers and pesticides are considered. Heavy metal uptake by the crop is considered.

## Technology
Conventional production

## Reference product
- strawberry: 1 kg; By-product classification allocatable product; CPC 01354: Strawberries
  production volume 9.23429e6 kg
  properties: carbon allocation 0.00466317 kg, carbon content 0.04617, carbon content, fossil 0, carbon content, non-fossil 0.04617, dry mass 0.101 kg, price 1.81 EUR2005, water content 8.90099, water in wet mass 0.899 kg, wet mass 1 kg

## Inputs from technosphere
- [thio]carbamate-compound: 2.85352e-7 kg; lognormal variance with pedigree 0.00584984, pedigree (2,2,4,5,1)
  properties: carbon content, fossil 0.626349, dry mass 1 kg, wet mass 1 kg
- acetamide-anillide-compound, unspecified: 1.13715e-6 kg; lognormal variance with pedigree 0.00584984, pedigree (2,2,4,5,1)
  properties: carbon content, fossil 0.659175, dry mass 1 kg, wet mass 1 kg
- ammonia, anhydrous, liquid: 2.80693e-5, 7.63752e-7, 2.41289e-6, 7.28697e-6, 3.41426e-6, 8.07713e-5, 7.43768e-6, 3.75384e-6 kg (8 suppliers, which the file names only by identifier); sum of these 0.00013391 kg; lognormal variance with pedigree 0.116177, pedigree (2,1,4,5,1)
  properties: dry mass 1 kg, wet mass 1 kg
- ammonium nitrate: 0.000737792, 0.000567072, 0.00192505 kg (3 suppliers, which the file names only by identifier); sum of these 0.00322991 kg; lognormal variance with pedigree 0.116177, pedigree (2,1,4,5,1)
  properties: dry mass 1 kg, wet mass 1 kg
- ammonium sulfate: 0.00017645 kg; lognormal variance with pedigree 0.116177, pedigree (2,1,4,5,1)
  properties: dry mass 1 kg, wet mass 1 kg
- boric acid, anhydrous, powder: 1.07327e-5 kg; lognormal variance with pedigree 0.00584984, pedigree (2,2,4,5,1)
  properties: dry mass 1 kg, wet mass 1 kg
- electricity, low voltage: 0.0805855, 0.394798, 0.0580265, 0.0197053, 0.114995, 0.273658, 1.10465, 0.00358349 kWh (8 suppliers, which the file names only by identifier); sum of these 2.05 kWh; lognormal variance with pedigree 0.116177, pedigree (2,1,4,5,1)
- glyphosate: 1.95488e-5 kg; lognormal variance with pedigree 0.00584984, pedigree (2,2,4,5,1)
  properties: carbon content, fossil 0.214286, dry mass 1 kg, wet mass 1 kg
- greenhouse, plastic walls and roof: 0.1 m2*year; lognormal variance with pedigree 0.116177, pedigree (2,1,4,5,1)
  properties: Surface 7 m2, lifetime 25 year
- heat, central or small-scale, natural gas: 0.00537381, 33.2086 MJ (2 suppliers, which the file names only by identifier); sum of these 33.214 MJ; lognormal variance with pedigree 0.116177, pedigree (2,1,4,5,1)
  properties: heating value, net 1 MJ
- inorganic nitrogen fertiliser, as N: 1.03826e-5, 3.05399e-6, 1.47074e-5, 4.91307e-7, 1.0463e-6, 2.47988e-6, 2.12293e-6, 2.42196e-5, 2.60817e-6, 0.00163253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 kg (63 suppliers, which the file names only by identifier); sum of these 0.00306583 kg; lognormal variance with pedigree 0.116177, pedigree (2,1,4,5,1)
  properties: dry mass 1 kg, wet mass 1 kg
- inorganic phosphorus fertiliser, as P2O5: 4.17177e-7, 1.01775e-6, 2.51918e-7, 5.64297e-7, 1.64755e-5, 1.0369e-5, 9.10735e-6, 6.65064e-7, 1.81381e-7, 5.40113e-6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 kg (63 suppliers, which the file names only by identifier); sum of these 0.00179999 kg; lognormal variance with pedigree 0.116177, pedigree (2,1,4,5,1)
  properties: dry mass 1 kg, wet mass 1 kg
- inorganic potassium fertiliser, as K2O: 4.22489e-6, 2.94303e-6, 1.54279e-6, 2.34772e-6, 3.94082e-6, 1.35749e-5, 3.45702e-5, 3.41258e-6, 0.000822004, 3.52158e-5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 kg (63 suppliers, which the file names only by identifier); sum of these 0.0061156 kg; lognormal variance with pedigree 0.116177, pedigree (2,1,4,5,1)
  properties: dry mass 1 kg, wet mass 1 kg
- irrigation: 1.39058e-5, 2.86116e-5, 0.000123214, 0.00211664, 0.00397333, 0.000206328, 3.72842e-5, 8.3419e-6, 4.06869e-5, 8.1343e-6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 m3 (16 suppliers, which the file names only by identifier); sum of these 0.0082222 m3; lognormal variance with pedigree 0.116177, pedigree (2,1,4,5,1)
  properties: dry mass 0.11 kg, water content 9089.91, wet mass 1000 kg
- mulching: 1e-5 ha; lognormal variance with pedigree 0.116177, pedigree (2,1,4,5,1)
- packaging film, low density polyethylene: 0.0019 kg
  properties: carbon content, fossil 0.857143, dry mass 1 kg, heating value, net 42.47 MJ, wet mass 1 kg
- packaging, for fertilisers: 0.0260474 kg; lognormal variance with pedigree 0.0512, pedigree (4,3,4,5,4)
  properties: carbon content, fossil 0.825301, dry mass 1 kg, heating value, net 25.01 MJ, price 0.0642 EUR2005, wet mass 1 kg
- packaging, for pesticides: 0.00091548 kg; lognormal variance with pedigree 0.0512, pedigree (4,3,4,5,4)
  properties: carbon content, fossil 0.85714, dry mass 1 kg, heating value, net 25.97 MJ, price 0.0642 EUR2005, wet mass 1 kg
- potassium sulfate: 0.000526204 kg; lognormal variance with pedigree 0.116177, pedigree (2,1,4,5,1)
  properties: dry mass 1 kg, wet mass 1 kg
- pyrethroid-compound: 1.37033e-7 kg; lognormal variance with pedigree 0.00584984, pedigree (2,2,4,5,1)
  properties: carbon content, fossil 0.623, dry mass 1 kg, wet mass 1 kg
- sowing: 1e-5 ha; lognormal variance with pedigree 0.116177, pedigree (2,1,4,5,1)
- strawberry seedling, for planting: 0.43 unit; lognormal variance with pedigree 0.116177, pedigree (2,1,4,5,1)
  properties: carbon content, non-fossil 0.439481, dry mass 0.578035 kg, water content 0.73, wet mass 1 kg
- transport, tractor and trailer, agricultural: 0.002 metric ton*km; lognormal variance with pedigree 0.154439, pedigree (4,1,4,5,1)
- trichloromethane: 0.000425899 kg; lognormal variance with pedigree 0.00584984, pedigree (2,2,4,5,1)
  properties: carbon content, fossil 0.101695, dry mass 1 kg, heating value, net 4.06 MJ, wet mass 1 kg
- urea: 0.00034322, 4.34077e-5, 0.000293085 kg (3 suppliers, which the file names only by identifier); sum of these 0.000679713 kg; lognormal variance with pedigree 0.116177, pedigree (2,1,4,5,1)
  properties: carbon content, fossil 0.2, dry mass 1 kg, wet mass 1 kg

## Inputs from nature
- Carbon dioxide, in air [natural resource, in air]: 0.18287 kg; lognormal variance with pedigree 0.00584984, pedigree (2,2,4,5,1)
- Energy, gross calorific value, in biomass [natural resource, biotic]: 1.9372 MJ; lognormal variance with pedigree 0.00584984, pedigree (2,2,4,5,1)
- Occupation, annual crop [natural resource, land]: 0.10027 m2*year
- Transformation, from arable land, unspecified use [natural resource, land]: 0.1 m2
- Transformation, to arable land, unspecified use [natural resource, land]: 0.1 m2

## Emissions to nature
- Ammonia [air, non-urban air or from high stacks]: 0.000260669 kg; lognormal variance with pedigree 0.0367216, pedigree (2,2,4,5,1)
- Carbon dioxide, fossil [air, non-urban air or from high stacks]: 0.00074667 kg; lognormal variance with pedigree 0.00584984, pedigree (2,2,4,5,1)
- Carbon dioxide, from soil or biomass stock [air, non-urban air or from high stacks]: 0.001797 kg; normal variance with pedigree 0.5072, pedigree (3,3,5,5,2)
- Dinitrogen monoxide [air, non-urban air or from high stacks]: 7.48718e-5 kg; lognormal variance with pedigree 0.116664, pedigree (2,2,4,5,1)
- Nitrogen oxides [air, non-urban air or from high stacks]: 0.000169948 kg; lognormal variance with pedigree 0.116664, pedigree (2,2,4,5,1)
- Water [air, non-urban air or from high stacks]: 0.0074 m3; lognormal variance with pedigree 0.116177, pedigree (2,1,4,5,1)
- Acrinathrin [soil, agricultural]: 4.06662e-8 kg; lognormal variance with pedigree 0.0367216, pedigree (2,2,4,5,1)
- Boron [soil, agricultural]: 1.93938e-6 kg; lognormal variance with pedigree 0.0367216, pedigree (2,2,4,5,1)
- Boscalid [soil, agricultural]: 1.15817e-6 kg; lognormal variance with pedigree 0.0367216, pedigree (2,2,4,5,1)
- Cadmium II [soil, agricultural]: 1.24666e-7 kg
- Chloropicrin [soil, agricultural]: 0.000433773 kg; lognormal variance with pedigree 0.0367216, pedigree (2,2,4,5,1)
- Chromium III [soil, agricultural]: 1.15599e-6 kg
- Copper ion [soil, agricultural]: -3.40143e-7 kg
- Glyphosate [soil, agricultural]: 1.99102e-5 kg; lognormal variance with pedigree 0.0367216, pedigree (2,2,4,5,1)
- Kresoxim-methyl [soil, agricultural]: 2.16886e-7 kg; lognormal variance with pedigree 0.0367216, pedigree (2,2,4,5,1)
- Lambda-cyhalothrin [soil, agricultural]: 9.89002e-8 kg; lognormal variance with pedigree 0.0367216, pedigree (2,2,4,5,1)
- Lead II [soil, agricultural]: 1.26523e-7 kg
- Mercury II [soil, agricultural]: -9.58178e-10 kg
- Nickel II [soil, agricultural]: 2.34078e-7 kg
- Pyraclostrobin [soil, agricultural]: 2.90628e-7 kg; lognormal variance with pedigree 0.0367216, pedigree (2,2,4,5,1)
- Spinosad [soil, agricultural]: 3.12316e-7 kg; lognormal variance with pedigree 0.0367216, pedigree (2,2,4,5,1)
- Zinc II [soil, agricultural]: -8.66484e-7 kg
- Cadmium II [water, ground-]: 4.76794e-10 kg; lognormal variance with pedigree 0.348938, pedigree (2,2,4,5,1)
- Chromium III [water, ground-]: 2.07255e-7 kg; lognormal variance with pedigree 0.348938, pedigree (2,2,4,5,1)
- Copper ion [water, ground-]: 3.40044e-8 kg; lognormal variance with pedigree 0.348938, pedigree (2,2,4,5,1)
- Lead II [water, ground-]: 3.00263e-9 kg; lognormal variance with pedigree 0.348938, pedigree (2,2,4,5,1)
- Mercury II [water, ground-]: 1.13256e-11 kg; lognormal variance with pedigree 0.348938, pedigree (2,2,4,5,1)
- Nitrate [water, ground-]: 0.000849817 kg; lognormal variance with pedigree 0.167866, pedigree (2,2,4,5,1)
- Phosphate [water, ground-]: 3.08621e-6 kg; lognormal variance with pedigree 0.167866, pedigree (2,2,4,5,1)
- Phosphate [water, surface water]: 1.11877e-5 kg; lognormal variance with pedigree 0.177266, pedigree (3,2,4,5,3)
- Water [water, ground-]: 0.0001644 m3; lognormal variance with pedigree 0.116177, pedigree (2,1,4,5,1)
- Water [water, surface water]: 0.0006576 m3; lognormal variance with pedigree 0.116177, pedigree (2,1,4,5,1)
- Zinc II [water, ground-]: 2.48923e-7 kg; lognormal variance with pedigree 0.348938, pedigree (2,2,4,5,1)

## Sampling procedure
WFLDB Methodological Guidelines for the Life Cycle Inventory of Agricultural Products in the latest version, available at: https://ecoquery.ecoinvent.org/File/Reports. Data sources: Data were categorised from level 0 (L0) to level (L4) as follows: L0 = estimate, proxy; L1 = statistical data (e.g. FAOSTAT); L2 = L1 adapted to crop and country; L3 = literature data or L1 resp. L2 data approved by experts; medium detailing (i.e. kg of total N-fertiliser); L4 = L3 data of high detailing (i.e. portion N-fertiliser types).In this dataset data were obtained for yield: L3; Fertilisers: L4; Pesticides: L1; Machinery: L0; Irrigation: L2. For information regarding the calculation of individual exchanges see supporting documentation WFLDB-Documentation.pdf

## Extrapolations
The amount of the exchanges are copy from a regional dataset.

## Review by Assumpció ANTON 2016-05-30
Be aware that the use of statistics in input calculations could provide some specific inputs not common for specific crops, this should be corrected if better information is available and better reflexed in DQR . Currently, I would dissent for some of good marks provided, being a revision of criteria applied advisable.
Pesticides will need to be amended periodically checking for update of pesticides' ban.
