# polyurethane production, flexible foam, TDI-based, low density

Dataset: EcoSpold 2, unit process
Geography: RoW
Time period: 1997-01-01 to 2022-12-31
Technology level: current
Classification: ISIC rev.4 ecoinvent: 2013:Manufacture of plastics and synthetic rubber in primary forms
Synonyms: flexible polyurethane foams FPF PU
Scenario: Business-as-Usual
System model: Allocation, cut-off by classification
Generated by: [System]
Database: ecoinvent
isCopyrightProtected: true
accessRestrictedTo: 1

## General comment
This dataset represents the production of 1 kg of one possible composition of polyurethane (PUR) flexible foam (18 to 25 kg/m³). Flexible polyurethane foam is used to manufacture mattresses, upholstered furniture and car seats, but also acoustic insulation boards, carpet underlays, household sponges, clothing and sportswear, packaging and many other applications. More specifically, the high density TDI-based grades are typically used in furniture and bedding, whereas the low-density TDI-based grades are preferred for insulation, packaging, building and footwear.This dataset models the production of PUR foam from polyol and toluene diisocyanate (TDI). The inventory is estimated based on industrial data.
References:
Adam, N., Avar, G., Blankenheim, H., Friederichs, W., Giersig, M., Weigand, E., Halfmann, M., Wittbecker, F.-W., Larimer, D.-R., Maier, U., Meyer-Ahrens, S., Noble, K.-L. and Wussow, H.-G. 2005. Polyurethanes. Ullmann's Encyclopedia of Industrial Chemistry.
[This dataset is meant to replace the following datasets:
- polyurethane production, flexible foam, GLO, 1997 - 2020]

## Included activities start
From reception of raw materials at the factory gate.

## Included activities end
This activity ends with the production of 1 kg of PUR flexible foam.

## Geography
Typical composition for European conditions.

## Technology
Polyurethane is made by reacting diisocyanates and polyols. To generate PU foam, addition of water to the main reagents causes a side reaction producing carbon dioxide, which acts as a blowing agent. Flexible slabstock polyurethane foams are produced as large blocks using a continuous process with minimal human handling. Continuous foam machines are the standard in Europe today.
The process represents production with water as a blowing agent, althought this might not be the case all over the world. If this is important in your study, make sure to check which blowing agent is used and replace it, if necessary.
References:
The full report can be accessed here: https://www.europur.org/images/20150821_EPD_EUROPUR_PU_foam.pdf (last accessed 2020-12-14).
The data is a copy of the corresponding RER dataset, uncertianty has been adjusted accrodingly.

## Time period
Time of publications.

## Parameters
- fraction, process water, to air: 0.205 dimensionless; name fraction_PW_to_air; lognormal variance with pedigree 0.092025, pedigree (4,4,3,2,4)
  Literature value (Statistics Canada, 2007 & Shaffer, K.H., 2008, Consumptive water use in the Great Lakes Basin, USGS) (Vionnet, S., Quantis Water Database - Technical Report, 2012).

## Reference product
- polyurethane, flexible foam: 1 kg; By-product classification allocatable product; CPC 34740: Polyacetals, other polyethers and epoxide resins, in primary forms; polycarbonates, alkyd resins, polyallyl es[…]
  production volume 3.154e8 kg
  properties: carbon allocation 0.633827 kg, carbon content 0.633827, carbon content, fossil 0.633827, carbon content, non-fossil 0, dry mass 1 kg, heating value, net 30.67 MJ, price 1.29 EUR2005, water content 0, water in wet mass 0 kg, wet mass 1 kg

## Inputs from technosphere
- N-methyl-2-pyrrolidone: 2.39e-5 kg; lognormal variance with pedigree 0.0413, pedigree (2,2,2,5,4)
  properties: carbon content, fossil 0.585366, dry mass 1 kg, heating value, net 29.36 MJ, wet mass 1 kg
- chemical factory, organics: 4e-10 unit; lognormal variance with pedigree 0.3098, pedigree (2,3,2,5,3)
- chemical, organic: 0.00177 kg; lognormal variance with pedigree 0.0413, pedigree (2,2,2,5,4)
  properties: carbon content, fossil 0.628, dry mass 1 kg, heating value, net 19.03 MJ, wet mass 1 kg
- compressed air, 1000 kPa gauge: 0.00839 m3; lognormal variance with pedigree 0.0013, pedigree (2,2,2,5,1)
- cyclic N-compound: 0.000645502 kg; lognormal variance with pedigree 0.0413, pedigree (2,2,2,5,4)
  properties: carbon content, fossil 0.641962, dry mass 1 kg, wet mass 1 kg
- dichloromethane: 1.43e-6 kg; lognormal variance with pedigree 0.0013, pedigree (2,2,2,5,1)
  properties: carbon content, fossil 0.142857, dry mass 1 kg, heating value, net 7.14 MJ, wet mass 1 kg
- diethylene glycol: 3.51e-5 kg; lognormal variance with pedigree 0.0413, pedigree (2,2,2,5,4)
  properties: carbon content, fossil 0.45283, dry mass 1 kg, heating value, net 25.14 MJ, wet mass 1 kg
- electricity, medium voltage: 0.00195542, 0.000981355, 0.0179411, 0.000297126, 5.82324e-5, 0.00626673 kWh (6 suppliers, which the file names only by identifier); sum of these 0.0275 kWh; lognormal variance with pedigree 0.0013, pedigree (2,2,2,5,1)
- glycerine: 0.000451294 kg; lognormal variance with pedigree 0.0013, pedigree (2,2,2,5,1)
  properties: carbon content, non-fossil 0.391304, dry mass 1 kg, heating value, net 18 MJ, wet mass 1 kg
- heat, district or industrial, natural gas: 0.0195494, 0.000321247 MJ (2 suppliers, which the file names only by identifier); sum of these 0.0198706 MJ; lognormal variance with pedigree 0.0013, pedigree (2,2,2,5,1)
  properties: heating value, net 1 MJ
- lime, hydrated, packed: 0.0246111 kg; lognormal variance with pedigree 0.0013, pedigree (2,2,2,5,1)
  properties: dry mass 0.997 kg, water content 0.00300903, wet mass 1 kg
- monoethanolamine: 3.44e-5 kg; lognormal variance with pedigree 0.0013, pedigree (2,2,2,5,1)
  properties: carbon content, fossil 0.393443, dry mass 1 kg, heating value, net 25.8 MJ, wet mass 1 kg
- nitrogen, liquid: 0.000426895 kg; lognormal variance with pedigree 0.0013, pedigree (2,2,2,5,1)
  properties: dry mass 1 kg, wet mass 1 kg
- packaging film, low density polyethylene: 0.0018985 kg; lognormal variance with pedigree 0.0013, pedigree (2,2,2,5,1)
  properties: carbon content, fossil 0.857143, dry mass 1 kg, heating value, net 42.47 MJ, wet mass 1 kg
- paper, woodcontaining, supercalendered: 0.00988 kg; lognormal variance with pedigree 0.0013, pedigree (2,2,2,5,1)
  properties: carbon content, fossil 0.0109646, carbon content, non-fossil 0.289073, dry mass 0.945 kg, heating value, net 14.11 MJ, water content 0.0582011, wet mass 1 kg
- polyol: 0.67343 kg; lognormal variance with pedigree 0.0013, pedigree (2,2,2,5,1)
  properties: carbon content, fossil 0.640856, dry mass 1 kg, heating value, net 19.42 MJ, wet mass 1 kg
- silicon, metallurgical grade: 0.00726525 kg; lognormal variance with pedigree 0.0013, pedigree (2,2,2,5,1)
  properties: dry mass 1 kg, wet mass 1 kg
- spent solvent mixture: -1.59e-6 kg; lognormal variance with pedigree 0.0013, pedigree (2,2,1,5,1)
  properties: carbon content, fossil 0.571257, dry mass 0.835 kg, heating value, net 21.7 MJ, water content 0.197605, wet mass 1 kg
- styrene-acrylonitrile copolymer: 0.000863437 kg; lognormal variance with pedigree 0.0013, pedigree (2,2,2,5,1)
  properties: carbon content, fossil 0.856023, dry mass 1 kg, heating value, net 32.54 MJ, wet mass 1 kg
- tap water: 4.25323e-5, 3.14733e-6, 0.000486719, 8.47867e-6, 1.0206e-6, 1.68672e-6, 1.10647e-6 kg (7 suppliers, which the file names only by identifier); sum of these 0.000544691 kg; lognormal variance with pedigree 0.0013, pedigree (2,2,2,5,1)
  properties: carbon content, fossil 0.00178991, dry mass 0.000337476 kg, water content 2962.17, wet mass 1 kg
- toluene diisocyanate: 0.345638 kg; lognormal variance with pedigree 0.0013, pedigree (2,2,2,5,1)
  properties: carbon content, fossil 0.62069, dry mass 1 kg, heating value, net 22.98 MJ, wet mass 1 kg
- triphenyl phosphate: 0.00138001 kg; lognormal variance with pedigree 0.0413, pedigree (2,2,2,5,4)
  properties: heating value, net 25.65 MJ
- urea: 1.54009e-5, 1.94778e-6, 1.31513e-5 kg (3 suppliers, which the file names only by identifier); sum of these 3.05e-5 kg; lognormal variance with pedigree 0.0013, pedigree (2,2,2,5,1)
  properties: carbon content, fossil 0.2, dry mass 1 kg, wet mass 1 kg
- waste paint: -0.000789976 kg; lognormal variance with pedigree 0.0013, pedigree (2,2,1,5,1)
  properties: carbon content, fossil 0.65, dry mass 1 kg, heating value, net 19.7 MJ, wet mass 1 kg
- waste paper, unsorted: -0.00238 kg; lognormal variance with pedigree 0.0013, pedigree (2,2,1,5,1)
  properties: heating value, net 14.11 MJ, price 0.093 EUR2005
- waste plastic, mixture: -3.10115e-5, -2.94483e-5, -1.25283e-5, -5.67832e-6, -0.00112371, -0.00786658, -7.50818e-5 kg (7 suppliers, which the file names only by identifier); sum of these -0.00914403 kg; lognormal variance with pedigree 0.0013, pedigree (2,2,1,5,1)
  properties: carbon content, fossil 0.747344, dry mass 0.847 kg, heating value, net 30.79 MJ, water content 0.180638, wet mass 1 kg
- waste polyurethane: -5.27969e-6, -2.07078e-6, -2.1807e-6, -7.90181e-5, -3.99294e-7, -8.80978e-7, -0.00055317 kg (7 suppliers, which the file names only by identifier); sum of these -0.000643 kg; lognormal variance with pedigree 0.0013, pedigree (2,2,1,5,1)
  properties: carbon content, fossil 0.641283, dry mass 0.998 kg, heating value, net 30.67 MJ, water content 0.00200401, wet mass 1 kg
- wastewater, average: -7.94172e-8, -2.82756e-10 m3 (2 suppliers, which the file names only by identifier); sum of these -7.97e-8 m3; lognormal variance with pedigree 0.0013, pedigree (2,2,1,5,1)
  properties: carbon content, non-fossil 0.194039, dry mass 0.346837 kg, water content 2882.2, wet mass 1000 kg
- water, deionised: 0.0276862 kg; lognormal variance with pedigree 0.0013, pedigree (2,2,2,5,1)
  properties: wet mass 1 kg

## Inputs from nature
- Water, cooling, unspecified natural origin [natural resource, in water]: 1.33e-8 m3; lognormal variance with pedigree 0.0013, pedigree (2,2,2,5,1)

## Emissions to nature
- Carbon dioxide, fossil [air, unspecified]: 0.069 kg; lognormal variance with pedigree 0.0013, pedigree (2,2,2,5,1)
- NMVOC, non-methane volatile organic compounds [air, unspecified]: 0.000166 kg; lognormal variance with pedigree 0.0407, pedigree (2,2,2,5,1)
- Particulate Matter, > 2.5 um and < 10um [air, unspecified]: 8.24e-8 kg; lognormal variance with pedigree 0.3007, pedigree (2,2,2,5,1)
- Water [air, unspecified]: 1.33e-8 m3; lognormal variance with pedigree 0.0407, pedigree (2,2,2,5,1)

## Sampling procedure
Data based on industry report and expert judgement.

## Extrapolations
The dataset is a copy of the corresponding RER dataset, uncertainty has been adjusted accordingly.
