# bitumen adhesive compound production, hot

Dataset: EcoSpold 2, unit process
Geography: RoW
Time period: 1994-01-01 to 2022-12-31
Technology level: current
Classification: EcoSpold01Categories: plastics/others
Classification: ISIC rev.4 ecoinvent: 2399:Manufacture of other non-metallic mineral products n.e.c.
Synonyms: hot bonding compound, Heisskleber
Tags: ConvertedDataset
Scenario: Business-as-Usual
System model: Allocation, cut-off by classification
Generated by: Martin Lehmann
Published in: Kellenberger D. 2007
Database: ecoinvent
isCopyrightProtected: true
accessRestrictedTo: 1

## General comment
The dataset is applicable in the construction building sector. Bitumen adhesive compound is used to protect roads and roofs against water intrusion.
[This dataset was already contained in the ecoinvent database version 2. It was not individually updated during the transfer to ecoinvent version 3. Life Cycle Impact Assessment results may still have changed, as they are affected by changes in the supply chain, i.e. in other datasets. This dataset was generated following the ecoinvent quality guidelines for version 2. It may have been subject to central changes described in the ecoinvent version 3 change report (http://www.ecoinvent.org/database/ecoinvent-version-3/reports-of-changes/), and the results of the central updates were reviewed extensively. The changes added e.g. consistent water flows and other information throughout the database. The documentation of this dataset can be found in the ecoinvent reports of version 2, which are still available via the ecoinvent website. The change report linked above covers all central changes that were made during the conversion process.]

## Included activities end
The dataset describes the production of hot bitumen adhesive compound. Included sub-processes are the heating of the bitumen compound, the infrastructure, the transport by road and rail as well as the disposal of the compound cuttings in a municipal incineration.

## Geography
The data of this dataset is extracted from literature and producer information. Some own calculations (e.g. energy input, waste heat) were made.

## Technology
The technology involved is basically heating up the bitumen with a natural gas burner.

## Reference product
- bitumen adhesive compound, hot: 1 kg; By-product classification allocatable product; CPC 37940: Bituminous mixtures based on natural and artificial stone materials and bitumen, natural asphalt or related su[…]
  production volume 2.67763 kg
  properties: carbon allocation 0.83 kg, carbon content 0.83, carbon content, fossil 0.83, carbon content, non-fossil 0, dry mass 1 kg, heating value, net 25.15 MJ, price 0.26914 EUR2005, water content 0, water in wet mass 0 kg, wet mass 1 kg

## Inputs from technosphere
- chemical factory, organics: 4e-11 unit; lognormal variance with pedigree 0.3146, pedigree (2,4,5,5,1)
- heat, district or industrial, natural gas: 1.17765, 0.0193518 MJ (2 suppliers, which the file names only by identifier); sum of these 1.197 MJ; lognormal variance with pedigree 0.0132, pedigree (2,3,5,5,1)
  properties: heating value, net 1 MJ
- pitch: 0.00631265, 0.00311162, 0.0545978, 0.140831, 0.796135, 0.0090119 kg (6 suppliers, which the file names only by identifier); sum of these 1.01 kg; lognormal variance with pedigree 0.0146, pedigree (2,4,5,5,1)
  properties: carbon content, fossil 0.83, dry mass 1 kg, heating value, net 28 MJ, wet mass 1 kg
- waste bitumen sheet: -0.0101 kg; lognormal variance with pedigree 0.0346, pedigree (2,4,3,5,3)
  properties: carbon content, fossil 0.643207, dry mass 0.985 kg, heating value, net 40.2 MJ, water content 0.0152284, wet mass 1 kg

## Emissions to nature
- Benzo(a)pyrene [air, unspecified]: 6.92e-9 kg; lognormal variance with pedigree 0.652, pedigree (1,1,5,5,1)
- NMVOC, non-methane volatile organic compounds [air, unspecified]: 0.0015 kg; lognormal variance with pedigree 0.1346, pedigree (2,4,5,5,1)

## Sampling procedure
Literature, database

## Extrapolations
see Geography This dataset has been copied from an original dataset covering the geography RER. The uncertainty has been adjusted accordingly.

## Review by Rolf Frischknecht 2007-11-07
passed
