# methylchloride production

Dataset: EcoSpold 2, unit process
Geography: RoW
Time period: 1997-01-01 to 2022-12-31
Technology level: current
Classification: ISIC rev.4 ecoinvent: 2011:Manufacture of basic chemicals
Classification: EcoSpold01Categories: chemicals/organics
Synonyms: chloromethane; monochloromethane
Tags: ConvertedDataset
Scenario: Business-as-Usual
System model: Allocation, cut-off by classification
Share of production covered: 78 %
Generated by: Alex Primas
Published in: Althaus H.-J. 2007
Database: ecoinvent
isCopyrightProtected: true
accessRestrictedTo: 1

## General comment
The data source for this process is a system inventory from Boustead. Due to the cumulated form of this data only the ressources and emissions included in the data source were considered. No land occupation and land use is included in this dataset. Further it was not possible to implement an uncertainity assessment with this data.
[This dataset was already contained in the ecoinvent database version 2. It was not individually updated during the transfer to ecoinvent version 3. Life Cycle Impact Assessment results may still have changed, as they are affected by changes in the supply chain, i.e. in other datasets. This dataset was generated following the ecoinvent quality guidelines for version 2. It may have been subject to central changes described in the ecoinvent version 3 change report (http://www.ecoinvent.org/database/ecoinvent-version-3/reports-of-changes/), and the results of the central updates were reviewed extensively. The changes added e.g. consistent water flows and other information throughout the database. The documentation of this dataset can be found in the ecoinvent reports of version 2, which are still available via the ecoinvent website. The change report linked above covers all central changes that were made during the conversion process.]

## Included activities end
Raw materials, processing energy, emissions to air and water from process, energy services and transports, infrastructure only partly included, no infrastructure of main process included, no land use data included.

## Geography
Data from various plants within Europe.

## Technology
Data refers to actual technology used in the companies included. This leads in total to an average value including all important production routes for this chemical

## Time period
Time of literature publication. Measurements took place before this period.

## Parameters
- fraction, cooling water, cooling pond system, to air: 0.032 dimensionless; name fraction_CW_CP_to_air; lognormal variance with pedigree 0.0413, pedigree (2,3,1,3,1)
  Calculated based on literature value (Scown, C.D., 2011, Water Footprint of U.S. Transportation Fuels and supplying information of the article) (Vionnet, S., Quantis Water Database - Technical Report, 2012).
- fraction, cooling water, once-through system, to air: 0.004 dimensionless; name fraction_CW_OT_to_air; lognormal variance with pedigree 0.0413, pedigree (2,3,1,3,1)
  (same comment as for fraction, cooling water, cooling pond system, to air)
- fraction, cooling water, recirculating system, to air: 0.771 dimensionless; name fraction_CW_R_to_air; lognormal variance with pedigree 0.0413, pedigree (2,3,1,3,1)
  (same comment as for fraction, cooling water, cooling pond system, to air)
- fraction, cooling water, to air: 0.3875 dimensionless; name fraction_CW_to_air; = (0.5*fraction_CW_OT_to_air)+(0.5*fraction_CW_R_to_air); lognormal variance with pedigree 0.092025, pedigree (4,4,3,2,4)
  Calculated value based on literature value (see comments of the other parametres present in this dataset) and expert opinion. In the case when no industry/literature data are available about the type of cooling or directly fraction, cooling water, to air specific for the process a default assumption is applied. It is assumed that the once-through cooling system is used in 50% of all cases and recirculating system is used in another 50% of all cases.
- fraction, process water, to air: 0.205 dimensionless; lognormal variance with pedigree 0.092025, pedigree (4,4,3,2,4)

## Reference product
- methylchloride: 1 kg; By-product classification allocatable product; CPC 34110: Hydrocarbons and their halogenated, sulphonated, nitrated or nitrosated derivatives
  production volume 3.41775 kg
  properties: carbon allocation 0.24 kg, carbon content 0.24, carbon content, fossil 0.24, carbon content, non-fossil 0, dry mass 1 kg, heating value, net 14.41 MJ, price 1.12 EUR2005, water content 0, water in wet mass 0 kg, wet mass 1 kg

## Inputs from technosphere
All rows: lognormal variance with pedigree 0.002, pedigree (1,1,1,5,1)
- average incineration residue: -0.0201 kg
  properties: carbon content, fossil 0.0325466, carbon content, non-fossil 0.0511208, dry mass 1 kg, wet mass 1 kg
- decommissioned chemical production facilities: -1.1e-5 kg
  properties: carbon content, fossil 0.0169382, carbon content, non-fossil 5.78006e-6, dry mass 1 kg, wet mass 1 kg
- hazardous waste, for incineration: -0.0008 kg
  properties: carbon content, fossil 0.554667, dry mass 0.75 kg, heating value, net 17 MJ, water content 0.333333, wet mass 1 kg
- municipal solid waste: -7.29861e-7, -4.32055e-7, -6.13013e-8, -1.27598e-5, -3.94267e-6, -5.40843e-7, -2.03684e-6, -2.14326e-6, -5.59353e-6, -2.18775e-6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 kg (33 suppliers, which the file names only by identifier); sum of these -0.0016045 kg
  properties: carbon content, fossil 0.171549, carbon content, non-fossil 0.261655, dry mass 0.771 kg, heating value, net 11.74 MJ, water content 0.297017, wet mass 1 kg
- spoil from hard coal mining: -0.071 kg
  properties: carbon content, fossil 0.007879, dry mass 1 kg, wet mass 1 kg
- waste plastic, mixture: -9.38221e-10, -1.58519e-9, -1.09387e-9, -7.44491e-10, -8.94073e-10, -1.50529e-9, -1.13387e-9, -6.54549e-9, -2.93134e-11, -1.64867e-10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 kg (36 suppliers, which the file names only by identifier); sum of these -5e-7 kg
  properties: carbon content, fossil 0.747344, dry mass 0.847 kg, heating value, net 30.79 MJ, water content 0.180638, wet mass 1 kg
- waste wood, untreated: -1.41973e-10, -3.86068e-10, -5.35218e-9, -1.04192e-10, -1.11662e-10, -6.0532e-10, -3.13714e-8, -4.60098e-10, -6.77456e-9, -1.26647e-10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 kg (36 suppliers, which the file names only by identifier); sum of these -5e-7 kg
  properties: carbon content, non-fossil 0.48632, dry mass 0.8 kg, heating value, net 13.99 MJ, water content 0.25, wet mass 1 kg

## Inputs from nature
- Aluminium [natural resource, in ground]: 1.48e-5 kg; lognormal variance with pedigree 0.002, pedigree (1,1,5,5,1)
- Barium [natural resource, in ground]: 6.5e-5 kg; lognormal variance with pedigree 0.002, pedigree (1,1,5,5,1)
- Calcite [natural resource, in ground]: 0.055 kg; lognormal variance with pedigree 0.002, pedigree (1,1,5,5,1)
- Coal, brown [natural resource, in ground]: 0.048 kg; lognormal variance with pedigree 0.002, pedigree (1,1,5,5,1)
- Coal, hard, unspecified [natural resource, in ground]: 0.27 kg; lognormal variance with pedigree 0.002, pedigree (1,1,5,5,1)
- Dolomite [natural resource, in ground]: 3e-6 kg; lognormal variance with pedigree 0.002, pedigree (1,1,5,5,1)
- Energy, potential (in hydropower reservoir), converted [natural resource, in water]: 0.18 MJ
- Fluorspar [natural resource, in ground]: 2e-6 kg; lognormal variance with pedigree 0.002, pedigree (1,1,5,5,1)
- Gas, natural [natural resource, in ground]: 0.838 Sm3; lognormal variance with pedigree 0.002, pedigree (1,1,5,5,1)
- Iron [natural resource, in ground]: 0.00021 kg; lognormal variance with pedigree 0.002, pedigree (1,1,5,5,1)
- Lead [natural resource, in ground]: 1e-6 kg; lognormal variance with pedigree 0.002, pedigree (1,1,5,5,1)
- Oil, crude [natural resource, in ground]: 0.077 kg; lognormal variance with pedigree 0.002, pedigree (1,1,5,5,1)
- Olivine [natural resource, in ground]: 2e-6 kg; lognormal variance with pedigree 0.002, pedigree (1,1,5,5,1)
- Sand, unspecified [natural resource, in ground]: 0.00033 kg; lognormal variance with pedigree 0.002, pedigree (1,1,5,5,1)
- Sodium chloride [natural resource, in ground]: 0.99 kg; lognormal variance with pedigree 0.002, pedigree (1,1,5,5,1)
- Sulfur [natural resource, in ground]: 0.0042 kg; lognormal variance with pedigree 0.002, pedigree (1,1,5,5,1)
- Uranium [natural resource, in ground]: 1.03e-5 kg; lognormal variance with pedigree 0.002, pedigree (1,1,5,5,1)
- Water, cooling, unspecified natural origin [natural resource, in water]: 0.02 m3; lognormal variance with pedigree 0.002, pedigree (1,1,5,5,1)
- Water, river [natural resource, in water]: 3.9e-6 m3; lognormal variance with pedigree 0.002, pedigree (1,1,5,5,1)
- Water, salt, ocean [natural resource, in water]: 2.3e-7 m3; lognormal variance with pedigree 0.002, pedigree (1,1,5,5,1)
- Water, unspecified natural origin [natural resource, in water]: 0.00391 m3; lognormal variance with pedigree 0.002, pedigree (1,1,5,5,1)
- Water, well, in ground [natural resource, in water]: 0.00019 m3; lognormal variance with pedigree 0.002, pedigree (1,1,5,5,1)
- Wood, unspecified, standing [natural resource, biotic]: 6.08e-9 m3; lognormal variance with pedigree 0.002, pedigree (1,1,5,5,1)

## Emissions to nature
- Aldehydes, unspecified [air, urban air close to ground]: 5e-7 kg; lognormal variance with pedigree 0.002, pedigree (1,1,5,5,1)
- Ammonia [air, urban air close to ground]: 5e-7 kg; lognormal variance with pedigree 0.002, pedigree (1,1,5,5,1)
- Carbon dioxide, fossil [air, urban air close to ground]: 2.4 kg; lognormal variance with pedigree 0.002, pedigree (1,1,5,5,1)
- Carbon monoxide, fossil [air, urban air close to ground]: 0.0012 kg; lognormal variance with pedigree 0.002, pedigree (1,1,5,5,1)
- Chlorine [air, urban air close to ground]: 5e-7 kg; lognormal variance with pedigree 0.002, pedigree (1,1,5,5,1)
- Chloroethylene [air, urban air close to ground]: 6e-6 kg; lognormal variance with pedigree 0.002, pedigree (1,1,5,5,1)
- Dinitrogen monoxide [air, urban air close to ground]: 5e-7 kg; lognormal variance with pedigree 0.002, pedigree (1,1,5,5,1)
- Ethane, 1,2-dichloro- [air, urban air close to ground]: 6e-6 kg; lognormal variance with pedigree 0.002, pedigree (1,1,5,5,1)
- Fluorine [air, urban air close to ground]: 5e-7 kg; lognormal variance with pedigree 0.002, pedigree (1,1,5,5,1)
- Hydrocarbons, aromatic [air, urban air close to ground]: 5e-7 kg; lognormal variance with pedigree 0.002, pedigree (1,1,5,5,1)
- Hydrocarbons, chlorinated [air, urban air close to ground]: 0.00078 kg; lognormal variance with pedigree 0.002, pedigree (1,1,5,5,1)
- Hydrochloric acid [air, urban air close to ground]: 0.00022 kg; lognormal variance with pedigree 0.002, pedigree (1,1,5,5,1)
- Hydrogen [air, urban air close to ground]: 0.0022 kg; lognormal variance with pedigree 0.002, pedigree (1,1,5,5,1)
- Hydrogen fluoride [air, urban air close to ground]: 7e-6 kg; lognormal variance with pedigree 0.002, pedigree (1,1,5,5,1)
- Hydrogen sulfide [air, urban air close to ground]: 5e-7 kg; lognormal variance with pedigree 0.002, pedigree (1,1,5,5,1)
- Lead II [air, urban air close to ground]: 5e-7 kg; lognormal variance with pedigree 0.002, pedigree (1,1,5,5,1)
- Mercury II [air, urban air close to ground]: 5e-7 kg; lognormal variance with pedigree 0.002, pedigree (1,1,5,5,1)
- Methane, dichlorodifluoro-, CFC-12 [air, urban air close to ground]: 1.2e-5 kg; lognormal variance with pedigree 0.002, pedigree (1,1,5,5,1)
- Methane, fossil [air, urban air close to ground]: 0.02 kg; lognormal variance with pedigree 0.002, pedigree (1,1,5,5,1)
- NMVOC, non-methane volatile organic compounds [air, urban air close to ground]: 0.00173 kg; lognormal variance with pedigree 0.002, pedigree (1,1,5,5,1)
- Nitrogen oxides [air, urban air close to ground]: 0.013 kg; lognormal variance with pedigree 0.002, pedigree (1,1,5,5,1)
- Particulate Matter, < 2.5 um [air, urban air close to ground]: 0.00125 kg; lognormal variance with pedigree 0.002, pedigree (1,1,5,5,1)
- Particulate Matter, > 10 um [air, urban air close to ground]: 0.0016 kg; lognormal variance with pedigree 0.002, pedigree (1,1,5,5,1)
- Particulate Matter, > 2.5 um and < 10um [air, urban air close to ground]: 0.00215 kg; lognormal variance with pedigree 0.002, pedigree (1,1,5,5,1)
- Sulfate [air, urban air close to ground]: 4.9e-6 kg; lognormal variance with pedigree 0.002, pedigree (1,1,5,5,1)
- Sulfur dioxide [air, urban air close to ground]: 0.012 kg; lognormal variance with pedigree 0.002, pedigree (1,1,5,5,1)
- Water [air, unspecified]: 0.00859135 m3; lognormal variance with pedigree 0.0427, pedigree (2,2,5,5,1)
- AOX, Adsorbable Organic Halogen [water, surface water]: 5e-7 kg; lognormal variance with pedigree 0.002, pedigree (1,1,5,5,1)
- Acidity, unspecified [water, surface water]: 3.3e-5 kg; lognormal variance with pedigree 0.002, pedigree (1,1,5,5,1)
- Aluminium III [water, surface water]: 5e-7 kg; lognormal variance with pedigree 0.002, pedigree (1,1,5,5,1)
- Ammonium [water, surface water]: 1e-6 kg; lognormal variance with pedigree 0.002, pedigree (1,1,5,5,1)
- BOD5, Biological Oxygen Demand [water, surface water]: 1.3e-5 kg; lognormal variance with pedigree 0.002, pedigree (1,1,5,5,1)
- Bromate [water, surface water]: 5e-7 kg; lognormal variance with pedigree 0.002, pedigree (1,1,5,5,1)
- COD, Chemical Oxygen Demand [water, surface water]: 0.00019 kg; lognormal variance with pedigree 0.002, pedigree (1,1,5,5,1)
- Calcium II [water, surface water]: 0.016 kg; lognormal variance with pedigree 0.002, pedigree (1,1,5,5,1)
- Carbonate [water, surface water]: 2e-6 kg; lognormal variance with pedigree 0.002, pedigree (1,1,5,5,1)
- Chlorate [water, surface water]: 5e-7 kg; lognormal variance with pedigree 0.002, pedigree (1,1,5,5,1)
- Chloride [water, surface water]: 0.19 kg; lognormal variance with pedigree 0.002, pedigree (1,1,5,5,1)
- Chlorinated solvents, unspecified [water, surface water]: 3e-5 kg; lognormal variance with pedigree 0.002, pedigree (1,1,5,5,1)
- Chlorine [water, surface water]: 5e-7 kg; lognormal variance with pedigree 0.002, pedigree (1,1,5,5,1)
- Chloroethylene [water, surface water]: 5e-7 kg; lognormal variance with pedigree 0.002, pedigree (1,1,5,5,1)
- Copper ion [water, surface water]: 5e-7 kg; lognormal variance with pedigree 0.002, pedigree (1,1,5,5,1)
- Cyanide [water, surface water]: 5e-7 kg; lognormal variance with pedigree 0.002, pedigree (1,1,5,5,1)
- DOC, Dissolved Organic Carbon [water, surface water]: 2.2e-5 kg; lognormal variance with pedigree 0.002, pedigree (1,1,5,5,1)
- Dissolved solids [water, surface water]: 2.8e-5 kg; lognormal variance with pedigree 0.002, pedigree (1,1,5,5,1)
- Ethane, 1,2-dichloro- [water, surface water]: 5e-7 kg; lognormal variance with pedigree 0.002, pedigree (1,1,5,5,1)
- Fluoride [water, surface water]: 5e-7 kg; lognormal variance with pedigree 0.002, pedigree (1,1,5,5,1)
- Hydrocarbons, unspecified [water, surface water]: 8.85e-5 kg; lognormal variance with pedigree 0.002, pedigree (1,1,5,5,1)
- Iron ion [water, surface water]: 3.8e-5 kg; lognormal variance with pedigree 0.002, pedigree (1,1,5,5,1)
- Magnesium [water, surface water]: 6e-6 kg; lognormal variance with pedigree 0.002, pedigree (1,1,5,5,1)
- Mercury II [water, surface water]: 5e-7 kg; lognormal variance with pedigree 0.002, pedigree (1,1,5,5,1)
- Nickel II [water, surface water]: 5e-7 kg; lognormal variance with pedigree 0.002, pedigree (1,1,5,5,1)
- Nitrate [water, surface water]: 5e-7 kg; lognormal variance with pedigree 0.002, pedigree (1,1,5,5,1)
- Nitrogen [water, surface water]: 1e-6 kg; lognormal variance with pedigree 0.002, pedigree (1,1,5,5,1)
- Oils, unspecified [water, surface water]: 5e-7 kg; lognormal variance with pedigree 0.002, pedigree (1,1,5,5,1)
- Phenol [water, surface water]: 5e-7 kg; lognormal variance with pedigree 0.002, pedigree (1,1,5,5,1)
- Phosphorus [water, surface water]: 8.8e-7 kg; lognormal variance with pedigree 0.002, pedigree (1,1,5,5,1)
- Potassium I [water, surface water]: 5e-7 kg; lognormal variance with pedigree 0.002, pedigree (1,1,5,5,1)
- Sodium I [water, surface water]: 0.1 kg; lognormal variance with pedigree 0.002, pedigree (1,1,5,5,1)
- Sulfate [water, surface water]: 0.0014 kg; lognormal variance with pedigree 0.002, pedigree (1,1,5,5,1)
- Sulfide [water, surface water]: 1.8e-5 kg; lognormal variance with pedigree 0.002, pedigree (1,1,5,5,1)
- Suspended solids, unspecified [water, surface water]: 0.00052 kg; lognormal variance with pedigree 0.002, pedigree (1,1,5,5,1)
- TOC, Total Organic Carbon [water, surface water]: 2.2e-5 kg; lognormal variance with pedigree 0.002, pedigree (1,1,5,5,1)
- Water [water, unspecified]: 0.0155128 m3; lognormal variance with pedigree 0.0427, pedigree (2,2,5,5,1)
- Zinc II [water, surface water]: 5e-7 kg; lognormal variance with pedigree 0.002, pedigree (1,1,5,5,1)

## Sampling procedure
Data represent a large share of the European production. Due to the cummulated data source for the product system invetory there are important parameters as land use or soil emissions missing in this dataset. Considered are only emissions stated in the original source of Boustead.

## Extrapolations
none This dataset has been copied from an original dataset covering the geography WEU. The uncertainty has been adjusted accordingly.

## Review by Roland Hischier 2010-04-06
passed.
