# chlorine, for reuse in zirconium and hafnium tetrachloride production, to generic market for chlorine

Dataset: EcoSpold 2, unit process
Geography: RoW
Time period: 2021-01-01 to 2022-12-31
Technology level: current
Classification: ISIC rev.4 ecoinvent: 2011:Manufacture of basic chemicals
Scenario: Business-as-Usual
System model: Allocation, cut-off by classification
Generated by: Efstathios Kakkos
Database: ecoinvent
isCopyrightProtected: true
accessRestrictedTo: 1

## General comment
This activity links chlorine, obtained from the electrolysis of magnesium chloride that is produced during the production of zirconium & hafnium sponge, to the market for chlorine, liquid.
As the chlorine that is recovered through the electrolysis of magnesium chloride is exclusively reused for the production of zirconium and hafnium tetrachloride, it is assumed that it actually does not supply the market for chlorine. For this reason, the production volume is a dummy value.
The purpose of this activity is to link the recovered chlorine to the market for "chlorine, liquid" in the Consequential system model. In that system model, the activities that are consuming chlorine recovered through the electrolysis of magnesium chloride get instead supplied by the marginal suppliers of chlorine, liquid.

## Reference product
- chlorine, liquid: 1 kg; By-product classification allocatable product; CPC 34231: Chemical elements n.e.c.; inorganic acids except phosphoric, nitric and sulphonitric; inorganic oxygen compoun[…]
  production volume 1.85756 kg
  properties: carbon allocation 0 kg, carbon content 0, carbon content, fossil 0, carbon content, non-fossil 0, dry mass 1 kg, price 0.148 EUR2005, water content 0, water in wet mass 0 kg, wet mass 1 kg

## Inputs from technosphere
- chlorine, for reuse in zirconium and hafnium tetrachloride production: 1 kg
  properties: dry mass 1 kg, price 0.148 EUR2005, wet mass 1 kg
