# tomato production, fresh grade, in heated greenhouse

Dataset: EcoSpold 2, unit process
Geography: RoW
Time period: 2009-01-01 to 2022-12-31
Technology level: current
Classification: ISIC rev.4 ecoinvent: 0113:Growing of vegetables and melons, roots and tubers
Tags: WFLDB
Scenario: Business-as-Usual
System model: Allocation, cut-off by classification
Generated by: [System]
Database: ecoinvent
isCopyrightProtected: true
accessRestrictedTo: 1

## General comment
This global dataset is a copy of the regional NL dataset, except for the following modifications.
The production volume represents the global annual production.
The geographicalCorrelation score of every pedigree matrix of was changed to '5'.
Yield of the global dataset = 483140 kg/ha, calculated as a weighted average of the regional yields.
The comments below were part of the NL regional dataset.
This dataset represents the production of 1 kg of tomato for fresh consumption. The reference flow is the average yield per ha and year, from 2009 - 2012: yield (483 t/ha) obtained under irrigated conditions (total amount of water 1014 m3/ha). The data are representative of tomatoes for fresh consumption, produced in the Netherlands for the export market. Mineral NPK fertiliser input is 1025-0-851 kg/ha. No organic fertilisers are applied. Total active ingredients (a.i.) applied as pesticides amount to 45.7 kg a.i./ha.
The dataset was modelled within the project 'World Food LCA database (WFLDB)'. The aim of this project was to provide inventories of a broad variety of agricultural products and processes and to cover for each product at least 50% of the global export market. The export share of fresh grade tomatoes produced in the Netherlands amounts to 13.3 % of the global export (tonnage exported in 2010). The production system regarded in this dataset aimed at representing fresh grade tomatoes produced in the Netherlands for the export market.
PEF-Quality: data quality rating (DQR) = 1.8 (i.e. very good quality). This dataset refers to an average situation; for specific situations exchanges might differ substantially due to site specific parameters

## Included activities start
This activity starts with soil cultivation after the harvest of the previous crop.

## Included activities end
This activity ends with harvest and transport to the farm gate. Storage is not included.
The dataset includes all activities during a cycle, i.e. all machine operations, corresponding infrastructure, fuel use and sheds. Machine operations include: soil cultivation, fertilisation, pesticide application, harvesting, and on-farm transport. Further, direct field emissions and land use change are included. Irrigation is included, as well as greenhouses infrastructures and energy consumption when relevant. The inputs of seedlings, fertilisers and pesticides as well as packaging of fertilisers and pesticides are considered. Heavy metal uptake by the crop is considered.

## Technology
Conventional production

## Reference product
- tomato, fresh grade: 1 kg; By-product classification allocatable product; CPC 01234: Tomatoes
  production volume 1.53619e10 kg
  properties: carbon allocation 0.197361 kg, carbon content 0.383276, carbon content, fossil 0, carbon content, non-fossil 0.383276, dry mass 0.514933 kg, price 1.09 EUR2005, water content 0.942, water in wet mass 0.485067 kg, wet mass 1 kg

## Inputs from technosphere
- ammonia, anhydrous, liquid: 1.98224e-5, 5.39359e-7, 1.70398e-6, 5.14603e-6, 2.41114e-6, 5.70404e-5, 5.25247e-6, 2.65095e-6 kg (8 suppliers, which the file names only by identifier); sum of these 9.45668e-5 kg; lognormal variance with pedigree 0.116177, pedigree (2,1,4,5,1)
  properties: dry mass 1 kg, wet mass 1 kg
- ammonium nitrate: 1.90614e-5, 1.46508e-5, 4.97352e-5 kg (3 suppliers, which the file names only by identifier); sum of these 8.34474e-5 kg; lognormal variance with pedigree 0.116177, pedigree (2,1,4,5,1)
  properties: dry mass 1 kg, wet mass 1 kg
- ammonium sulfate: 3.40709e-5 kg; lognormal variance with pedigree 0.116177, pedigree (2,1,4,5,1)
  properties: dry mass 1 kg, wet mass 1 kg
- application of plant protection product, by field sprayer: 6.20938e-6 ha; lognormal variance with pedigree 0.116664, pedigree (2,2,4,5,1)
- electricity, low voltage: 0.00402491, 0.00112512, 0.000610837, 3.86919e-5, 0.000288259, 0.00265566, 5.01901e-5, 7.72001e-5, 0.00824638, 6.88544e-5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 kWh (46 suppliers, which the file names only by identifier); sum of these 0.209442 kWh; lognormal variance with pedigree 0.116177, pedigree (2,1,4,5,1)
- greenhouse, glass walls and roof: 0.0206979 m2*year; lognormal variance with pedigree 0.116177, pedigree (2,1,4,5,1)
  properties: Surface 7 m2, lifetime 25 year
- heat, central or small-scale, natural gas: 9.22265e-7, 8.83918 MJ (2 suppliers, which the file names only by identifier); sum of these 8.83919 MJ; lognormal variance with pedigree 0.116177, pedigree (2,1,4,5,1)
  properties: heating value, net 1 MJ
- inorganic nitrogen fertiliser, as N: 6.52886e-6, 9.24834e-6, 3.08945e-7, 6.57939e-7, 1.55941e-6, 1.33495e-6, 3.11806e-7, 1.52299e-5, 1.64008e-6, 0.00102657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 kg (63 suppliers, which the file names only by identifier); sum of these 0.00192626 kg; lognormal variance with pedigree 0.116177, pedigree (2,1,4,5,1)
  properties: dry mass 1 kg, wet mass 1 kg
- inorganic potassium fertiliser, as K2O: 4.7263e-7, 3.29231e-7, 1.72588e-7, 2.62635e-7, 4.40851e-7, 1.51859e-6, 3.86729e-6, 3.81758e-7, 9.19559e-5, 3.93952e-6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 kg (63 suppliers, which the file names only by identifier); sum of these 0.000683715 kg; lognormal variance with pedigree 0.116177, pedigree (2,1,4,5,1)
  properties: dry mass 1 kg, wet mass 1 kg
- irrigation: 0.0141 m3; lognormal variance with pedigree 0.116177, pedigree (2,1,4,5,1)
  properties: dry mass 0.11 kg, water content 9089.91, wet mass 1000 kg
- packaging, for fertilisers: 0.0078015 kg; lognormal variance with pedigree 0.0512, pedigree (4,3,4,5,4)
  properties: carbon content, fossil 0.825301, dry mass 1 kg, heating value, net 25.01 MJ, price 0.0642 EUR2005, wet mass 1 kg
- packaging, for pesticides: 0.000189134 kg; lognormal variance with pedigree 0.0512, pedigree (4,3,4,5,4)
  properties: carbon content, fossil 0.85714, dry mass 1 kg, heating value, net 25.97 MJ, price 0.0642 EUR2005, wet mass 1 kg
- pesticide, unspecified: 9.45668e-5 kg; lognormal variance with pedigree 0.00584984, pedigree (2,2,4,5,1)
  properties: carbon content, fossil 0.486978, dry mass 1 kg, wet mass 1 kg
- planting: 2.06979e-6 ha; lognormal variance with pedigree 0.156177, pedigree (2,1,4,5,4)
- potassium chloride: 0.00137364 kg; lognormal variance with pedigree 0.116177, pedigree (2,1,4,5,1)
  properties: dry mass 1 kg, wet mass 1 kg
- potassium sulfate: 0.000389184 kg; lognormal variance with pedigree 0.116177, pedigree (2,1,4,5,1)
  properties: dry mass 1 kg, wet mass 1 kg
- stone wool: 0.00923935 kg
  properties: carbon content, fossil 0.015401, dry mass 1 kg, wet mass 1 kg
- tomato seedling, for planting: 0.0579542 unit; lognormal variance with pedigree 0.116177, pedigree (2,1,4,5,1)
  properties: carbon content, non-fossil 0.439481, dry mass 0.578035 kg, water content 0.73, wet mass 1 kg
- transport, tractor and trailer, agricultural: 0.000629782, 2.56099e-6 metric ton*km (2 suppliers, which the file names only by identifier); sum of these 0.000632343 metric ton*km; lognormal variance with pedigree 0.154439, pedigree (4,1,4,5,1)
- urea: 5.92764e-5, 7.4968e-6, 5.06179e-5 kg (3 suppliers, which the file names only by identifier); sum of these 0.000117391 kg; lognormal variance with pedigree 0.116177, pedigree (2,1,4,5,1)
  properties: carbon content, fossil 0.2, dry mass 1 kg, wet mass 1 kg
- waste glass: -3.37424e-5, -2.60686e-5, -2.81789e-5, -2.23697e-5, -2.88161e-5, -5.7065e-6, -0.000185135, -7.63025e-6, -0.000109343, -2.62051e-6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 kg (42 suppliers, which the file names only by identifier); sum of these -0.00923935 kg
  properties: dry mass 1 kg, heating value, net 0.05 MJ, wet mass 1 kg

## Inputs from nature
- Carbon dioxide, in air [natural resource, in air]: 0.100526 kg; lognormal variance with pedigree 0.00584984, pedigree (2,2,4,5,1)
- Energy, gross calorific value, in biomass [natural resource, biotic]: 0.903651 MJ; lognormal variance with pedigree 0.00584984, pedigree (2,2,4,5,1)
- Occupation, annual crop [natural resource, land]: 0.0207538 m2*year; lognormal variance with pedigree 0.0120616, pedigree (2,1,4,5,1)
- Transformation, from arable land, unspecified use [natural resource, land]: 0.0206979 m2; lognormal variance with pedigree 0.0362144, pedigree (2,1,4,5,1)
- Transformation, to arable land, unspecified use [natural resource, land]: 0.0206979 m2; lognormal variance with pedigree 0.0362144, pedigree (2,1,4,5,1)

## Emissions to nature
- Ammonia [air, non-urban air or from high stacks]: 7.86004e-5 kg; lognormal variance with pedigree 0.0367216, pedigree (2,2,4,5,1)
- Carbon dioxide, fossil [air, non-urban air or from high stacks]: 0.000128954 kg; lognormal variance with pedigree 0.00584984, pedigree (2,2,4,5,1)
- Carbon dioxide, from soil or biomass stock [air, non-urban air or from high stacks]: 0.00280229 kg; normal variance with pedigree 0.5072, pedigree (3,3,5,5,2)
- Dinitrogen monoxide [air, non-urban air or from high stacks]: 4.4542e-5 kg; lognormal variance with pedigree 0.116664, pedigree (2,2,4,5,1)
- Nitrogen oxides [air, non-urban air or from high stacks]: 8.36735e-5 kg; lognormal variance with pedigree 0.116664, pedigree (2,2,4,5,1)
- Water [air, non-urban air or from high stacks]: 0.00188807 m3; lognormal variance with pedigree 0.116177, pedigree (2,1,4,5,1)
- Cadmium II [soil, agricultural]: 9.09379e-9 kg
- Chromium III [soil, agricultural]: 1.04938e-7 kg
- Copper ion [soil, agricultural]: -3.04162e-7 kg
- Lead II [soil, agricultural]: 9.51391e-9 kg
- Mercury II [soil, agricultural]: -1.23637e-9 kg
- Nickel II [soil, agricultural]: 3.64885e-10 kg
- Pesticides, unspecified [soil, agricultural]: 9.45668e-5 kg; lognormal variance with pedigree 0.0367216, pedigree (2,2,4,5,1)
- Zinc II [soil, agricultural]: -1.27323e-6 kg
- Cadmium II [water, ground-]: 9.44923e-11 kg; lognormal variance with pedigree 0.348938, pedigree (2,2,4,5,1)
- Chromium III [water, ground-]: 4.21989e-8 kg; lognormal variance with pedigree 0.348938, pedigree (2,2,4,5,1)
- Copper ion [water, ground-]: 6.9483e-9 kg; lognormal variance with pedigree 0.348938, pedigree (2,2,4,5,1)
- Lead II [water, ground-]: 6.31163e-10 kg; lognormal variance with pedigree 0.348938, pedigree (2,2,4,5,1)
- Mercury II [water, ground-]: 2.44236e-12 kg; lognormal variance with pedigree 0.348938, pedigree (2,2,4,5,1)
- Phosphate [water, ground-]: 4.45213e-7 kg; lognormal variance with pedigree 0.167866, pedigree (2,2,4,5,1)
- Phosphate [water, surface water]: 1.11305e-6 kg; lognormal variance with pedigree 0.177266, pedigree (3,2,4,5,3)
- Water [water, ground-]: 4.19568e-5 m3; lognormal variance with pedigree 0.116177, pedigree (2,1,4,5,1)
- Water [water, surface water]: 0.000167827 m3; lognormal variance with pedigree 0.116177, pedigree (2,1,4,5,1)
- Zinc II [water, ground-]: 5.06768e-8 kg; lognormal variance with pedigree 0.348938, pedigree (2,2,4,5,1)

## Sampling procedure
WFLDB Methodological Guidelines for the Life Cycle Inventory of Agricultural Products in the latest version, available at: https://ecoquery.ecoinvent.org/File/Reports. Data sources: Data were categorised from level 0 (L0) to level (L4) as follows: L0 = estimate, proxy; L1 = statistical data (e.g. FAOSTAT); L2 = L1 adapted to crop and country; L3 = literature data or L1 resp. L2 data approved by experts; medium detailing (i.e. kg of total N-fertiliser); L4 = L3 data of high detailing (i.e. portion N-fertiliser types).In this dataset data were obtained for yield: L3; Fertilisers: L4; Pesticides: L1; Machinery: L0; Irrigation: L2. For information regarding the calculation of individual exchanges see supporting documentation WFLDB-Documentation.pdf

## Extrapolations
The amount of the exchanges are copy from a regional dataset.

## Review by Assumpció ANTON 2016-05-30
Be aware that the use of statistics in input calculations could provide some specific inputs not common for specific crops, this should be corrected if better information is available and better reflexed in DQR . Currently, I would dissent for some of good marks provided, being a revision of criteria applied advisable.
Pesticides will need to be amended periodically checking for update of pesticides' ban.
