# mepiquat chloride production

Dataset: EcoSpold 2, unit process
Geography: GLO
Time period: 2020-01-01 to 2022-12-31
Technology level: current
Classification: ISIC rev.4 ecoinvent: 2011:Manufacture of basic chemicals
Scenario: Business-as-Usual
System model: Allocation, cut-off by classification
Generated by: Daria Dellenbach
Database: ecoinvent
isCopyrightProtected: true
accessRestrictedTo: 1

## General comment
This dataset represents the production of 1 kg of mepiquat chloride. Emissions are estimated. Energy consumptions, infrastructure and transports are calculated with standard values. An overall yield of 95 % was assumed.
Mepiquat chloride is an organic substance with the CAS no.: 024307-26-4. It is called '1,1-dimethylpiperidinium chloride' under IUPAC naming and its molecular formula is: C7H16ClN. It is solid under normal conditions of temperature and pressure as hygroscopic crystals with a sweet smell. It is modelled as a pure substance. Mepiquat chloride is a plant growth regulator which is mainly applied to inhibit excessive growth of cotton and therefore simplifies mechanical harvesting of it. In combination with a pesticide it can as well help to stabilise barley stalks. There are no publicly available information about the consumption of this substance on industrial sites.
Reference(s):
Eller K., Henkes E., Rossbacher R., Hoke H., (2012). Amines, Aliphatic, Ullmann's Encyclopedia of Industrial Chemistry.
Unger T., (1996). Pesticide Synthesis Handbook, Noyes Publication.
Chemiepark GENDORF, Umwelterklärung 2016, https://www.gendorf.de/Nachbarn/Umweltschutz/Industrie%20und%20Nachhaltigkeit
Chemiepark GENDORF, Umwelterklärung 2017, https://www.gendorf.de/Nachbarn/Umweltschutz/Industrie%20und%20Nachhaltigkeit
Chemiepark GENDORF, Umwelterklärung 2020, https://www.gendorf.de/Nachbarn/Umweltschutz/Industrie%20und%20Nachhaltigkeit
Hischier, R. (2005) Establishing Life Cycle Inventories of Chemicals Based on Differing Data Availability (9 pp). The International Journal of Life Cycle Assessment, Volume 10, Issue 1, pp 59–67. 10.1065/lca2004.10.181.7

## Included activities start
Cradle to gate. The activity starts when the raw materials enter the process.

## Included activities end
Production of mepiquat chloride production including materials, energy uses, infrastructure and emissions.

## Technology
Mepiquatch chloride is produced from piperidine and methyl chloride:
C5H11N + 2CH3Cl --> C7H16ClN + HCl
Sodium hydroxide is added to neutralize the formed hydrochloric acid.
Reference(s):
Eller K., Henkes E., Rossbacher R., Hoke H., (2012). Amines, Aliphatic, Ullmann's Encyclopedia of Industrial Chemistry.
Unger T., (1996). Pesticide Synthesis Handbook, Noyes Publication.

## Reference product
- mepiquat chloride: 1 kg; By-product classification allocatable product; CPC 34663: Herbicides, anti-sprouting products and plant-growth regulators
  production volume 5.67323e6 kg
  properties: carbon allocation 0.561779 kg, carbon content 0.561779, carbon content, fossil 0.561779, carbon content, non-fossil 0, dry mass 1 kg, price 0.420865 EUR2005, water content 0, water in wet mass 0 kg, wet mass 1 kg

## Inputs from technosphere
- chemical factory, organics: 4e-10 unit; lognormal variance with pedigree 0.3492, pedigree (2,5,2,4,4)
- compressed air, 1000 kPa gauge: 0.130777, 0.321383 m3 (2 suppliers, which the file names only by identifier); sum of these 0.45216 m3; lognormal variance with pedigree 0.0498, pedigree (2,5,2,4,4)
- electricity, medium voltage: 0.39906 kWh; lognormal variance with pedigree 0.0498, pedigree (2,5,2,4,4)
- heat, district or industrial, natural gas: 1.8865 MJ; lognormal variance with pedigree 0.0498, pedigree (2,5,2,4,4)
  properties: heating value, net 1 MJ
- heat, from steam, in chemical industry: 0.176654, 0.0311463 MJ (2 suppliers, which the file names only by identifier); sum of these 0.2078 MJ; lognormal variance with pedigree 0.0498, pedigree (2,5,2,4,4)
  properties: heating value, net 1 MJ
- methylchloride: 0.104416, 0.612912 kg (2 suppliers, which the file names only by identifier); sum of these 0.717328 kg; lognormal variance with pedigree 0.0098, pedigree (2,5,2,2,2)
  properties: carbon content, fossil 0.24, dry mass 1 kg, heating value, net 14.41 MJ, wet mass 1 kg
- nitrogen, liquid: 0.00319013, 0.0116219 kg (2 suppliers, which the file names only by identifier); sum of these 0.014812 kg; lognormal variance with pedigree 0.0498, pedigree (2,5,2,4,4)
  properties: dry mass 1 kg, wet mass 1 kg
- piperidine: 0.601875 kg; lognormal variance with pedigree 0.0098, pedigree (2,5,2,2,2)
  properties: carbon content, fossil 0.705292, dry mass 1 kg, heating value, net 37.02 MJ, wet mass 1 kg
- sodium hydroxide, without water, in 50% solution state: 0.267244 kg; lognormal variance with pedigree 0.0098, pedigree (2,5,2,1,2)
  properties: dry mass 1 kg, heating value, net 3.03 MJ, wet mass 1 kg
- tap water: 0.0225 kg; lognormal variance with pedigree 0.0498, pedigree (2,5,2,4,4)
  properties: carbon content, fossil 0.00178991, dry mass 0.000337476 kg, water content 2962.17, wet mass 1 kg
- wastewater, average: -1.82351e-6, -6.49239e-9, -1.09583e-8, -4.36039e-7 m3 (4 suppliers, which the file names only by identifier); sum of these -2.277e-6 m3; lognormal variance with pedigree 0.0498, pedigree (2,5,1,4,4)
  properties: carbon content, non-fossil 0.194039, dry mass 0.346837 kg, water content 2882.2, wet mass 1000 kg

## Inputs from nature
- Water, cooling, unspecified natural origin [natural resource, in water]: 0.014707 m3; lognormal variance with pedigree 0.0498, pedigree (2,5,2,4,4)
- Water, river [natural resource, in water]: 0.00096543 m3; lognormal variance with pedigree 0.0498, pedigree (2,5,2,4,4)
- Water, well, in ground [natural resource, in water]: 0.00081652 m3; lognormal variance with pedigree 0.0498, pedigree (2,5,2,4,4)

## Emissions to nature
- Carbon dioxide, fossil [air, unspecified]: 0.113212 kg; lognormal variance with pedigree 0.0098, pedigree (2,5,2,2,2)
- Nitrogen [air, unspecified]: 0.014812 kg; lognormal variance with pedigree 0.0892, pedigree (2,5,2,4,4)
- Water [air, unspecified]: 0.00147 m3; lognormal variance with pedigree 0.0892, pedigree (2,5,2,4,4)
- BOD5, Biological Oxygen Demand [water, unspecified]: 0.00638701 kg; lognormal variance with pedigree 0.0492, pedigree (2,5,2,2,2)
- COD, Chemical Oxygen Demand [water, unspecified]: 0.00638701 kg; lognormal variance with pedigree 0.0492, pedigree (2,5,2,2,2)
- Chloride [water, unspecified]: 0.261795 kg; lognormal variance with pedigree 0.0492, pedigree (2,5,2,2,2)
- DOC, Dissolved Organic Carbon [water, unspecified]: 0.0016247 kg; lognormal variance with pedigree 0.0492, pedigree (2,5,2,2,2)
- Sodium I [water, surface water]: 0.153609 kg; lognormal variance with pedigree 0.0492, pedigree (2,5,2,2,2)
- TOC, Total Organic Carbon [water, unspecified]: 0.0016247 kg; lognormal variance with pedigree 0.0492, pedigree (2,5,2,2,2)
- Water [water, unspecified]: 0.01504 m3; lognormal variance with pedigree 0.0892, pedigree (2,5,2,4,4)

## Sampling procedure
Literature data and stoichiometric calculation. This inventory is partially based on a generic model of the production of chemicals. The data generated by this model have been improved with compound-specific data when available.
The model of the production of chemicals is using specific industry or literature data wherever possible and more generic data on chemical production processes to fill compound-specific data gaps when necessary. The basic principles of the model have been published in literature (Hischier, 2005). The model has been updated and extended with newly available data from the chemical industry.
In the model, unreacted fractions are treated in a waste treatment process, and emissions reported are after a waste treatment process that is included in the scope of this dataset. For volatile reactants, a small level of evaporation is assumed. Solvents and catalysts are mostly recycled in closed-loop systems within the scope of the dataset and reported flows are for losses from this system.
The main source of information for the values for heat, electricity, water (process and cooling), nitrogen, chemical factory is industry data from the GENDORF Chemical Park. The values are a 5-year average of data from 2015 to 2019 published by the GENDORF Chemical Park, which is based in Germany and produced an average of 2462760 tonnes of chemical substances in the years 2015-2019.

Reference(s):
Hischier, R. (2005) Establishing Life Cycle Inventories of Chemicals Based on Differing Data Availability (9 pp). The International Journal of Life Cycle Assessment, Volume 10, Issue 1, pp 59–67. 10.1065/lca2004.10.181.7
Chemiepark GENDORF, Umwelterklärung 2016, https://www.gendorf.de/Nachbarn/Umweltschutz/Industrie%20und%20Nachhaltigkeit
Chemiepark GENDORF, Umwelterklärung 2017, https://www.gendorf.de/Nachbarn/Umweltschutz/Industrie%20und%20Nachhaltigkeit
Chemiepark GENDORF, Umwelterklärung 2020, https://www.gendorf.de/Nachbarn/Umweltschutz/Industrie%20und%20Nachhaltigkeit
Eller K., Henkes E., Rossbacher R., Hoke H., (2012). Amines, Aliphatic, Ullmann's Encyclopedia of Industrial Chemistry.
Unger T., (1996). Pesticide Synthesis Handbook, Noyes Publication.
