# contouring, bronze

Dataset: EcoSpold 2, unit process
Geography: RoW
Time period: 1997-01-01 to 2022-12-31
Technology level: current
Classification: ISIC rev.4 ecoinvent: 2592:Treatment and coating of metals; machining
Classification: EcoSpold01Categories: metals/processing
Synonyms: rolling bronze
Tags: ConvertedDataset
Scenario: Business-as-Usual
System model: Allocation, cut-off by classification
Generated by: Hans-Jörg Althaus
Published in: Classen M. 2009
Database: ecoinvent
isCopyrightProtected: true
accessRestrictedTo: 1

## General comment
Most of the data used stem from processes similar to contouring bronze. Overall data quality is poor.
[This dataset was already contained in the ecoinvent database version 2. It was not individually updated during the transfer to ecoinvent version 3. Life Cycle Impact Assessment results may still have changed, as they are affected by changes in the supply chain, i.e. in other datasets. This dataset was generated following the ecoinvent quality guidelines for version 2. It may have been subject to central changes described in the ecoinvent version 3 change report (http://www.ecoinvent.org/database/ecoinvent-version-3/reports-of-changes/), and the results of the central updates were reviewed extensively. The changes added e.g. consistent water flows and other information throughout the database. The documentation of this dataset can be found in the ecoinvent reports of version 2, which are still available via the ecoinvent website. The change report linked above covers all central changes that were made during the conversion process.]

## Included activities end
Heating, rolling, degreasing / pickling and waste water treatment.

## Technology
Technique describes the average of European Union. Data are estimated basing on data of similar processes.

## Parameters
- fraction, process water, to air: 0.15 dimensionless; lognormal variance with pedigree 0.092025, pedigree (4,4,3,2,4)
- fraction, tap water, to air: 0.15 dimensionless; lognormal variance with pedigree 0.092025, pedigree (4,4,3,2,4)

## Reference product
- contouring, bronze: 1 kg; By-product classification allocatable product; CPC 88731: Metal treatment and coating services
  production volume 6.52637e7 kg
  properties: carbon allocation 0 kg, carbon content 0, carbon content, fossil 0, carbon content, non-fossil 0, dry mass 0.039644 kg, price 0.233589 EUR2005, water content 0, water in wet mass 0 kg, wet mass 0.039644 kg

## Inputs from technosphere
- bronze: 0.039644 kg; lognormal variance with pedigree 0.318, pedigree (4,5,5,5,5)
  properties: dry mass 1 kg, wet mass 1 kg
- electric arc furnace dust: -2.63322e-7, -0.000441327 kg (2 suppliers, which the file names only by identifier); sum of these -0.00044159 kg; lognormal variance with pedigree 0.38, pedigree (5,5,5,5,5)
  properties: carbon content, fossil 0.01339, dry mass 0.846 kg, water content 0.182033, wet mass 1 kg
- electricity, medium voltage: 0.00380422, 0.0160305, 0.00804514, 0.147081, 0.00243583, 0.000477388, 0.0454556 kWh (7 suppliers, which the file names only by identifier); sum of these 0.22333 kWh; lognormal variance with pedigree 0.38, pedigree (5,5,5,5,5)
- heat, district or industrial, natural gas: 1.6 MJ; lognormal variance with pedigree 0.318, pedigree (4,5,5,5,5)
  properties: heating value, net 1 MJ
- lubricating oil: 0.004 kg; lognormal variance with pedigree 0.318, pedigree (4,5,5,5,5)
  properties: carbon content, fossil 0.75, dry mass 1 kg, heating value, net 40.2 MJ, wet mass 1 kg
- rolling mill: 1.4286e-9 unit; lognormal variance with pedigree 0.68, pedigree (5,5,5,5,5)
- sludge from steel rolling: -0.016335 kg; lognormal variance with pedigree 0.38, pedigree (5,5,5,5,5)
  properties: carbon content, fossil 0.0123943, dry mass 0.8 kg, water content 0.25, wet mass 1 kg
- sulfuric acid: 0.34 kg; lognormal variance with pedigree 0.318, pedigree (4,5,5,5,5)
  properties: dry mass 1 kg, wet mass 1 kg
- tap water: 0.469391, 0.0347342, 5.37148, 0.0935714, 0.0186148, 0.0122111 kg (6 suppliers, which the file names only by identifier); sum of these 6 kg; lognormal variance with pedigree 0.18, pedigree (4,5,5,5,5)
  properties: carbon content, fossil 0.00178991, dry mass 0.000337476 kg, water content 2962.17, wet mass 1 kg

## Emissions to nature
- NMVOC, non-methane volatile organic compounds [air, unspecified]: 4.5e-5 kg; lognormal variance with pedigree 0.358, pedigree (4,5,5,5,5)
- Water [air, unspecified]: 0.0009 m3; lognormal variance with pedigree 0.0427, pedigree (2,2,5,5,1)
- Arsenic ion [water, unspecified]: 1.5714e-9 kg; lognormal variance with pedigree 1.02, pedigree (5,5,5,5,5)
- BOD5, Biological Oxygen Demand [water, unspecified]: 7.9e-5 kg; lognormal variance with pedigree 0.42, pedigree (5,5,5,5,5)
- COD, Chemical Oxygen Demand [water, unspecified]: 7.9e-5 kg; lognormal variance with pedigree 0.42, pedigree (5,5,5,5,5)
- Cadmium II [water, unspecified]: 1.5714e-9 kg; lognormal variance with pedigree 1.02, pedigree (5,5,5,5,5)
- Chromium III [water, unspecified]: 1.5086e-7 kg; lognormal variance with pedigree 1.02, pedigree (5,5,5,5,5)
- Chromium VI [water, unspecified]: 6.2857e-9 kg; lognormal variance with pedigree 1.02, pedigree (5,5,5,5,5)
- Copper ion [water, unspecified]: 1.7286e-6 kg; lognormal variance with pedigree 1.02, pedigree (5,5,5,5,5)
- DOC, Dissolved Organic Carbon [water, unspecified]: 2.0551e-5 kg; lognormal variance with pedigree 0.42, pedigree (5,5,5,5,5)
- Lead II [water, unspecified]: 1.5714e-7 kg; lognormal variance with pedigree 1.02, pedigree (5,5,5,5,5)
- Mercury II [water, unspecified]: 1.5714e-9 kg; lognormal variance with pedigree 1.02, pedigree (5,5,5,5,5)
- Nickel II [water, unspecified]: 4.7143e-7 kg; lognormal variance with pedigree 1.02, pedigree (5,5,5,5,5)
- TOC, Total Organic Carbon [water, unspecified]: 2.0551e-5 kg; lognormal variance with pedigree 0.42, pedigree (5,5,5,5,5)
- Tin ion [water, unspecified]: 1.5714e-7 kg; lognormal variance with pedigree 1.02, pedigree (5,5,5,5,5)
- Water [water, unspecified]: 0.0051 m3; lognormal variance with pedigree 0.0427, pedigree (2,2,5,5,1)
- Zinc II [water, unspecified]: 3.9286e-6 kg; lognormal variance with pedigree 1.02, pedigree (5,5,5,5,5)

## Sampling procedure
Literature

## Extrapolations
None This dataset has been copied from an original dataset covering the geography RER. The uncertainty has been adjusted accordingly.

## Review by Roland Hischier 2010-02-07
Validated for v1.01
